# Drain Channel AutoCAD
# Origin Points
# Note: Main plant drain channel origin point is defined in the stacked rapid sand filter drawing file.
EtDC_Origin := Et_Origin + [-L_Et - T_PlantWall; 0*m; -T_PlantWall]
# Entrance Tank Drain Channel
EtDCLayer := layer_new("EtDrainChannelCon", grey)
EtDC := DrainChannelF(EtDC_Origin, [180; 0; 0]*deg, Q_EtDCMax, W_EtDC, H_EtDC, L_EtDC, 1%, Nu_Water, E_Concrete, 1)
EtDCFrz := FreezeLayer("EtDrainChannelCon")
# Plant Drain Channel
MainDCLayer := layer_new("DrainChannelCon", grey)
MainDC := DrainChannelF(PlantDC_Origin, [270; 0; 0]*deg, Q_PlantDCMax, W_PlantDC, H_PlantDC, L_PlantDC, 1%, Nu_Water, E_Concrete, 1)
# Drain Channel Upper Walls
DCWestWall := BoxF([
    Plant_Origin[0] - L_Sed - T_PlantWall - W_PlantDC;
    Plant_Origin[1] - T_PlantWall;
    min(Z_Walkway - T_PlantWall - H_HumanAccess, Plant_Origin[2] - T_PlantWall)
], [
    Plant_Origin[0] - L_Sed - W_PlantDC - 2*T_PlantWall;
    Plant_Origin[1] - T_PlantWall + L_PlantDC;
    Z_Walkway - T_PlantWall
], [0; 0; 0]*deg)
DCEastWall := BoxF([
    Plant_Origin[0] - L_Sed;
    Plant_Origin[1] - T_PlantWall;
    min(Z_Walkway - T_PlantWall - H_HumanAccess, Plant_Origin[2] - T_PlantWall)
], [
    Plant_Origin[0] - L_Sed - T_PlantWall;
    Plant_Origin[1] - T_PlantWall + L_PlantDC;
    Z_Walkway - T_PlantWall
], [0; 0; 0]*deg)
FrzDrainChannel := FreezeLayer("DrainChannelCon")
FiInletChannelDCCutout := BoxF([
    Plant_Origin[0] - L_Sed - T_PlantWall - W_PlantDC;
    FiInletChannel_Origin[1] - T_PlantWall;
    FiInletChannel_Origin[2] - T_PlantWall
], [
    Plant_Origin[0] - L_Sed - W_PlantDC - 2*T_PlantWall;
    FiInletChannel_Origin[1] + 2*T_PlantWall + L_FiInletChannel;
    Z_Walkway - T_PlantWall
], [0; 0; 0]*deg)
SedDCCutout := BoxF([Plant_Origin[0] - L_Sed; Plant_Origin[1] - T_PlantWall; Plant_Origin[2] - T_PlantWall], [
    Plant_Origin[0] - L_Sed - T_PlantWall;
    Plant_Origin[1] + W_Sed*N_SedTanks + T_PlantWall*N_SedTanks;
    Z_Walkway - T_PlantWall
], [0; 0; 0]*deg)
FlocDCCutout := BoxF([Plant_Origin[0] - L_Sed; Floc_Origin[1]; Floc_Origin[2] - T_PlantWall], [
    Plant_Origin[0] - L_Sed - T_PlantWall;
    Floc_Origin[1] + (W_FlocChannel + T_PlantWall)*N_FlocChannels;
    Z_Walkway - T_PlantWall
], [0; 0; 0]*deg)
EtDCCutout := BoxF([Plant_Origin[0] - L_Sed; Et_Origin[1] - T_PlantWall; Et_Origin[2] - T_PlantWall - 30*cm], [Plant_Origin[0] - L_Sed - T_PlantWall; Et_Origin[1] + W_Et + T_PlantWall; Z_Walkway - T_PlantWall], [0; 0; 0]*deg)
SubtractDCCutouts := SubtractF(["DrainChannelCon"], "DeleteMe")
DCUpperWalls := stack(DCWestWall, DCEastWall, Union_All, FrzDrainChannel, FiInletChannelDCCutout, SedDCCutout, FlocDCCutout, EtDCCutout, GroupDelete, SubtractDCCutouts)
AC_DrainChannel := stack(EtDCLayer, EtDC, EtDCFrz, MainDCLayer, MainDC, DCUpperWalls)
