Lang := stringit_nounits(Language)
SetLayout(Layout) := concat("layout", sp, "s", sp, Layout)
RenameLayout(Original, New) := stack(concat("layout", sp, "r", sp, Original), New)
ViewPort(LayerVector, Component, Language) :=
    LoadTemplate ← stack(concat("-layout", sp, "t", sp, "AguaClara", sp, Language), "View")
    RenameTop ← RenameLayout("View", concat("TopView", Component))
    SetLayoutTop ← SetLayout(concat("TopView", Component))
    SwitchSpace ← ".ms"
    FreezeLayers ← FreezeVP(LayerVector)
    Zoom ← concat("z", sp, "o", sp, "all", sp)
    Top ← stack(LoadTemplate, RenameTop, SetLayoutTop, SwitchSpace, FreezeLayers, view("t"), Zoom)
    RenameLeft ← RenameLayout("View", concat("LeftView", Component))
    SetLayoutLeft ← SetLayout(concat("LeftView", Component))
    Left ← stack(LoadTemplate, RenameLeft, SetLayoutLeft, SwitchSpace, FreezeLayers, view("l"), Zoom)
    RenameFront ← RenameLayout("View", concat("FrontView", Component))
    SetLayoutFront ← SetLayout(concat("FrontView", Component))
    Front ← stack(LoadTemplate, RenameFront, SetLayoutFront, SwitchSpace, FreezeLayers, view("f"), Zoom)
    return stack(Top, Left, Front)
# Sed layers - "Sed"
# Filter layers - "Fi"
# Floc Layers - "Floc"
# EntranceTank Layers - "Et"
# Cdc layers - "Cdc"
# rapid mix layers - "RM"
# coagulant tank layers - "Coag"
# chlorine tank layers - "Chlor"
PrepLayouts := stack("laythw", concat("-layout", sp, "t", sp, "AguaClara", sp, Lang), "View", concat("layout", sp, "d", sp, "Layout1"), concat(sp, "d", sp, "Layout2"))
RenameView := RenameLayout("View", "TopView")
SetTopView := SetLayout("TopView")
ZoomView := concat("z", sp, "o", sp, "all", sp)
# .ms
TopViewPlant := stack(RenameView, SetTopView, ".ms", ZoomView)
LoadTemplate := stack(concat("-layout", sp, "t", sp, "AguaClara", sp, Lang), "View")
RenameFrontView := RenameLayout("View", "FrontView")
SetFrontView := SetLayout("FrontView")
# ZoomView
FrontViewPlant := stack(LoadTemplate, RenameFrontView, SetFrontView, ".ms", view("f"), ZoomView)
RenameLeftView := RenameLayout("View", "LeftView")
SetLeftView := SetLayout("LeftView")
# ZoomView
LeftViewPlant := stack(LoadTemplate, RenameLeftView, SetLeftView, ".ms", view("l"), ZoomView)
# Layouts of specific pieces
EtLayout := ViewPort(["~Et*"], "Et", Lang)
FlocLayout := ViewPort(["~Floc*"], "Floc", Lang)
SedOpLayout := ViewPort(["~Sed*"; "SedInletStopperPlu"; "SedLaunderCouplingCapPlu"], "RunningSed", Lang)
SedDrainLayout := ViewPort(["~Sed*"], "DrainingSed", Lang)
SedRefillLayout := ViewPort(["~Sed*"; "SedLaunderCouplingCapPlu"], "RefillingSed", Lang)
FiltLayout := ViewPort(["~Fi*"], "Filt", Lang)
CdcLayout := ViewPort(["~Cdc*"], "Cdc", Lang)
# Special Layouts
BaffleModuleLayout := ViewPort(["~FlocMod*"], "FlocModule", Lang)
SedModuleLayout := ViewPort(["~SedMod*"], "SedLamina", Lang)
CoagLayout := ViewPort(["~Coag*"], "Coag", Lang)
ChlorLayout := ViewPort(["~Chlor*"], "Chlor", Lang)
FilterCoagLayout := ViewPort(["~FilterCoag*"], "FilterCoag", Lang)
ConcreteLayout := ViewPort(["~*Con"], "Concrete", Lang)
PipingLayout := ViewPort(["~*Plu"], "Plu", Lang)
SpecificLayouts :=
    if EN_FlocHoriz == 1
        stack(SedModuleLayout, CoagLayout, ChlorLayout, FilterCoagLayout, ConcreteLayout, PipingLayout)
    else
        stack(BaffleModuleLayout, SedModuleLayout, CoagLayout, ChlorLayout, FilterCoagLayout, ConcreteLayout, PipingLayout)
DimensionScript :=
    SedTopDimLayer ← layer_new("SedTopDimension", purple)
    AddDim1 ← LinearDim(Plant_Origin, W_Sed, L_Sed + W_Sed, "v")
    AddDim2 ← LinearDim(Plant_Origin, -L_Sed, echannelbox_dim[1] + .5*m, "h")
    AddDim3 ← LinearDim(echannel_origin, echannelbox_dim[1], -W_Sed, "v")
    AddDim4 ← LinearDim(echannel_origin, -echannelbox_dim[0], -W_Sed, "h")
    AddDim5 ← LinearDim(channel_origin, -channelbox_dim[0], -W_Sed, "h")
    SedTopDim ← concat(AddDim1, AddDim2, AddDim3, AddDim4, AddDim5)
    SedSideDimLayer ← layer_new("SedSideDimension", purple)
    SedFrontDimLayer ← layer_new("SedFrontDimension", purple)
    return concat(SedTopDimLayer, SedTopDim, SedSideDimLayer, SedFrontDimLayer)
AC_Layout := stack(PrepLayouts, TopViewPlant, FrontViewPlant, LeftViewPlant, EtLayout, FlocLayout, SedOpLayout, SedDrainLayout, SedRefillLayout, FiltLayout, CdcLayout, SpecificLayouts, concat("layout", sp, "s", sp, "model", sp), [concat("-view", sp, "_SEISO", sp)])
