InsertMaterialDrawing := insertdwg("MaterialsInsert", Plant_Origin, 1, 1, 0*deg)
MatAssign(ApplyMaterial, ApplyLayers) := stack("-layer", "material", ApplyMaterial, ApplyLayers, concat(sp, sp))
# Some objects are assigned one material first, then another one is assigned later and overrides the first assignment. For instance, the valves in the sedimentation tank are originally PVC becauase the layer name contains "plu" but then become metal because the layer name also contains "valve"
ApplyCon := MatAssign("Flat - Polished Gray", "*con")
ApplyPipes := MatAssign("PVC - White", "*plu")
ApplySteelValve := MatAssign("Machined 02", "*ValveMetal*")
ApplyValveGrip := MatAssign("Smooth - Burnt Red", "*Grip*")
ApplyLamina := MatAssign("Transparent - Teal", "SedModLamella")
ApplyLaminaSupport := MatAssign("PVC - White", "SedPF*")
ApplyFlocPiping := MatAssign("PVC - White", "FlocModulePiping")
ApplyBaffles := MatAssign("Transparent - Teal", "FlocModBaffles")
ApplyTrashrack := MatAssign("Anodized - Gray Textured", "EtTrashrack")
ApplyCoagTanks := MatAssign("Textured - Royal Blue Matte", "CoagTanks")
ApplyCdcLeverArm := MatAssign("Brushed", "CdcLeverArm")
ApplyCdcLeverArmGrip := MatAssign("High Gloss - Burnt Red", "CdcLeverArmGrip")
ApplyScrews := MatAssign("Machined 02", "*Screw")
ApplyCdcLeverArmBracket := MatAssign("Machined 02", "CdcLeverArmBracket")
ApplyCdcChtTank := MatAssign("Transparent - White", "CdcChtTank")
ApplyCdcChtSupport := MatAssign("Machined 02", "CdcChtSupport")
ApplyCdcChtPipeClamp := MatAssign("Machined 02", "CdcChtPipeClamp")
ApplyCdcChtFloatValve := MatAssign("Smooth - Ivory", "CdcChtFloatValve")
ApplyCdcChtBarbedFitting := MatAssign("Smooth - Black", "CdcChtBarbedFitting")
ApplyCdcCalColPipe := MatAssign("Transparent - White", "CdcCalColumnPlu")
ApplyCdcCalColCaps := MatAssign("PVC - White", "CdcColumnCapsPlu")
ApplyCdcCalColStand := MatAssign("Birch - Solid Stained Dark No Gloss", "CdcCalColumnStand")
# If EN.MatApply = 0, materials will not be applied by the design server. However, the materials drawing will be inserted so that the user could run the commands to insert materials once he or she receives the plant drawing. If EN.MatApply = 1, the server will apply materials once the plant is drawn (materials will likely make the file too large to send by email).
AC_MatApply :=
    if EN_MatApply == 0
        stack(InsertMaterialDrawing)
    else
        stack(InsertMaterialDrawing, ApplyCon, ApplyPipes, ApplySteelValve, ApplyValveGrip, ApplyLamina, ApplyLaminaSupport, ApplyTrashrack, ApplyBaffles, ApplyCoagTanks, ApplyCdcLeverArm, ApplyCdcLeverArmGrip, ApplyScrews, ApplyCdcLeverArmBracket, ApplyCdcChtTank, ApplyCdcChtFloatValve, ApplyCdcChtPipeClamp, ApplyCdcChtBarbedFitting, ApplyCdcChtSupport)
