# These all rotate on the origin point.
# Wrapped Shapes
BoxF(OriginPoint, FarCorner, AngleVector) :=
    Zoom ← ZoomWindow([OriginPoint[0] - zc; OriginPoint[1] - zc; OriginPoint[2] - zc], [
        OriginPoint[0] + FarCorner[0] + zc;
        OriginPoint[1] + FarCorner[1] + zc;
        OriginPoint[2] + FarCorner[2] + zc
    ])
    Box ← Box(OriginPoint, FarCorner)
    Rotate ← [
        Rotate3DLast(OriginPoint, "z", AngleVector[0]);
        Rotate3DLast(OriginPoint, "y", AngleVector[1]);
        Rotate3DLast(OriginPoint, "x", AngleVector[2])
    ]
    if AngleVector[0] ≠ 0 or AngleVector[1] ≠ 0 or AngleVector[2] ≠ 0
        Box ← stack(Zoom, Box)
    for i ∈ 0 .. 2
        if AngleVector[i] ≠ 0
            Box ← stack(Box, Rotate[i])
    return Box
BoxSUBF(OriginPoint, FarCorner, AngleVector, SubtractionLayers) :=
    Zoom ← ZoomWindow([OriginPoint[0] - zc; OriginPoint[1] - zc; OriginPoint[2] - zc], [
        OriginPoint[0] + FarCorner[0] + zc;
        OriginPoint[1] + FarCorner[1] + zc;
        OriginPoint[2] + FarCorner[2] + zc
    ])
    Box ← Box(OriginPoint, FarCorner)
    Rotate ← [
        Rotate3DLast(OriginPoint, "z", AngleVector[0]);
        Rotate3DLast(OriginPoint, "y", AngleVector[1]);
        Rotate3DLast(OriginPoint, "x", AngleVector[2])
    ]
    if AngleVector[0] ≠ 0 or AngleVector[1] ≠ 0 or AngleVector[2] ≠ 0
        Box ← stack(Zoom, Box)
    for i ∈ 0 .. 2
        if AngleVector[i] ≠ 0
            Box ← stack(Box, Rotate[i])
    Group ← GroupLast("DeleteMe")
    Local ← stack(Box, Group, SubtractF(SubtractionLayers, "DeleteMe"), Box)
    return Local
WedgeF(OriginPoint, FarCorner, AngleVector) :=
    Zoom ← ZoomWindow([OriginPoint[0] - zc; OriginPoint[1] - zc; OriginPoint[2] - zc], [
        OriginPoint[0] + FarCorner[0] + zc;
        OriginPoint[1] + FarCorner[1] + zc;
        OriginPoint[2] + FarCorner[2] + zc
    ])
    Wedge ← wedge3d(OriginPoint, FarCorner)
    Rotate ← [
        Rotate3DLast(OriginPoint, "z", AngleVector[0]);
        Rotate3DLast(OriginPoint, "y", AngleVector[1]);
        Rotate3DLast(OriginPoint, "x", AngleVector[2])
    ]
    if AngleVector[0] ≠ 0 or AngleVector[1] ≠ 0 or AngleVector[2] ≠ 0
        Wedge ← stack(Zoom, Wedge)
    for i ∈ 0 .. 2
        if AngleVector[i] ≠ 0
            Wedge ← stack(Wedge, Rotate[i])
    return Wedge
WedgeSUBF(OriginPoint, FarCorner, AngleVector, SubtractionLayers) :=
    Zoom ← ZoomWindow([OriginPoint[0] - zc; OriginPoint[1] - zc; OriginPoint[2] - zc], [
        OriginPoint[0] + FarCorner[0] + zc;
        OriginPoint[1] + FarCorner[1] + zc;
        OriginPoint[2] + FarCorner[2] + zc
    ])
    Wedge ← wedge3d(OriginPoint, FarCorner)
    Rotate ← [
        Rotate3DLast(OriginPoint, "z", AngleVector[0]);
        Rotate3DLast(OriginPoint, "y", AngleVector[1]);
        Rotate3DLast(OriginPoint, "x", AngleVector[2])
    ]
    if AngleVector[0] ≠ 0 or AngleVector[1] ≠ 0 or AngleVector[2] ≠ 0
        Wedge ← stack(Zoom, Wedge)
    for i ∈ 0 .. 2
        if AngleVector[i] ≠ 0
            Wedge ← stack(Wedge, Rotate[i])
    Group ← GroupLast("DeleteMe")
    Local ← stack(Wedge, Group, SubtractF(SubtractionLayers, "DeleteMe"), Wedge)
    return Local
CylinderF(OriginPoint, Radius, Length, AngleVector) :=
    Zoom ← ZoomWindow([OriginPoint[0] - Radius - zc; OriginPoint[1] - Radius - zc; OriginPoint[2] - Length - zc], [OriginPoint[0] + Radius + zc; OriginPoint[1] + Radius + zc; OriginPoint[2] + zc])
    Cylinder ← cylinderD(OriginPoint, Radius, [OriginPoint[0] - Length; OriginPoint[1]; OriginPoint[2]])
    Rotate ← [Rotate3DLast(OriginPoint, "z", AngleVector[0]); Rotate3DLast(OriginPoint, "y", AngleVector[1])]
    if AngleVector[0] ≠ 0 or AngleVector[1] ≠ 0
        Cylinder ← stack(Zoom, Cylinder)
    for i ∈ 0 .. 1
        if AngleVector[i] ≠ 0
            Cylinder ← stack(Cylinder, Rotate[i])
    return Cylinder
# Origin defines the right side of the cylinder
CylinderSUBF(OriginPoint, Radius, Length, AngleVector, SubtractionLayers) :=
    Zoom ← ZoomWindow([OriginPoint[0] - Radius - zc; OriginPoint[1] - Radius - zc; OriginPoint[2] - Length - zc], [OriginPoint[0] + Radius + zc; OriginPoint[1] + Radius + zc; OriginPoint[2] + zc])
    Cylinder ← cylinderD(OriginPoint, Radius, [OriginPoint[0]; OriginPoint[1] - Length; OriginPoint[2]])
    Rotate ← [Rotate3DLast(OriginPoint, "z", AngleVector[0]); Rotate3DLast(OriginPoint, "y", AngleVector[1])]
    if AngleVector[0] ≠ 0 or AngleVector[1] ≠ 0
        Cylinder ← stack(Zoom, Cylinder)
    for i ∈ 0 .. 1
        if AngleVector[i] ≠ 0
            Cylinder ← stack(Cylinder, Rotate[i])
    Group ← GroupLast("DeleteMe")
    Local ← stack(Cylinder, Group, SubtractF(SubtractionLayers, "DeleteMe"), Cylinder)
    return Local
TorusF(OriginPoint, TorusRadius, TubeRadius, AngleVector) :=
    ViewFront ← view("f")
    Zoom ← ZoomWindow([
        OriginPoint[0] - TorusRadius - TubeRadius - zc;
        OriginPoint[2] - TorusRadius - TubeRadius - zc;
        -OriginPoint[1] - TubeRadius - zc
    ], [
        OriginPoint[0] + TorusRadius + TubeRadius + zc;
        OriginPoint[2] + TorusRadius + TubeRadius + zc;
        -OriginPoint[1] + TubeRadius + zc
    ])
    Torus ← Torus([OriginPoint[0]; OriginPoint[2]; -OriginPoint[1]], TorusRadius, TubeRadius)
    ViewTop ← view("t")
    Rotate ← [Rotate3DLast(OriginPoint, "z", AngleVector[0]); Rotate3DLast(OriginPoint, "y", AngleVector[1])]
    Final ←
        if AngleVector[0] == 0 or AngleVector[1] == 0
            stack(ViewFront, Torus, ViewTop)
        else
            stack(ViewFront, Zoom, Torus, ViewTop)
    for i ∈ 0 .. 1
        if AngleVector[i] ≠ 0
            Final ← stack(Final, Rotate[i])
    return Final
TorusSUBF(OriginPoint, TorusRadius, TubeRadius, AngleVector, SubtractionLayers) :=
    ViewFront ← view("f")
    Zoom ← ZoomWindow([
        OriginPoint[0] - TorusRadius - TubeRadius - zc;
        OriginPoint[2] - TorusRadius - TubeRadius - zc;
        -OriginPoint[1] - TubeRadius - zc
    ], [
        OriginPoint[0] + TorusRadius + TubeRadius + zc;
        OriginPoint[2] + TorusRadius + TubeRadius + zc;
        -OriginPoint[1] + TubeRadius + zc
    ])
    Torus ← Torus([OriginPoint[0]; OriginPoint[2]; -OriginPoint[1]], TorusRadius, TubeRadius)
    ViewTop ← view("t")
    Rotate ← [Rotate3DLast(OriginPoint, "z", AngleVector[0]); Rotate3DLast(OriginPoint, "y", AngleVector[1])]
    Torus ←
        if AngleVector[0] == 0 or AngleVector[1] == 0
            stack(ViewFront, Torus, ViewTop)
        else
            stack(ViewFront, Zoom, Torus, ViewTop)
    for i ∈ 0 .. 2
        if AngleVector[i] ≠ 0
            Torus ← stack(Torus, Rotate[i])
    Group ← GroupLast("DeleteMe")
    Local ← stack(Final, Group, SubtractF(SubtractionLayers, "DeleteMe"), Torus)
    return Local
# Reusable Variables
GroupDelete := GroupAll("DeleteMe")
