# Chemical Stock Tanks
# Available Tank Dimensions
# Supplier Information:
# http://www.rotoplast.com.co/cajones-y-canecas-industriales/
# Tank Volume | Tank Diameter | Tank Height
# This factor is based on the difference between one tank's
# volume and that of the next largest available tank. It helps the
# tank selection function below decide whether a jump to the next
# available tank is justified.
V_SupplierChemTankOld := [
    66*L;
    100*L;
    120*L;
    138*L;
    175*L;
    185*L;
    200*L;
    205*L;
    216*L;
    225*L;
    236*L;
    247*L;
    266*L;
    311*L;
    326*L;
    355*L;
    509*L;
    556*L;
    700*L;
    864*L
]
Dimensions_SupplierChemTankOld := [
    12*in, 36*in;
    14*in, 40*in;
    15*in, 42*in;
    16*in, 42*in;
    18*in, 42*in;
    20*in, 36*in;
    18*in, 48*in;
    20*in, 40*in;
    20*in, 42*in;
    20*in, 44*in;
    20*in, 46*in;
    20*in, 48*in;
    24*in, 36*in;
    24*in, 42*in;
    24*in, 44*in;
    24*in, 48*in;
    30*in, 44*in;
    30*in, 48*in;
    36*in, 42*in;
    40*in, 42*in
]
FactorOld := [1.06; 1.05; 1.04; 1.05; 1.03; 1.03; 1.01; 1.02; 1.02; 1.02; 1.02; 1.01; 1.03; 1.01; 1.03; 1.06; 1.01; 1.04; 1.04; 1.04]
# Tank Diameter | Tank Height
# Tank Volume
V_SupplierChemTank := [208.198*L; 450*L; 600*L; 750*L; 1100*L; 2500*L]
Dimensions_SupplierChemTank := [22.5*in, 33.5*in; 0.85*m, 0.99*m; 0.96*m, 1.10*m; 1.10*m, 1.02*m; 1.10*m, 1.39*m; 1.55*m, 1.65*m]
Factor := [1.05; 1.05; 1.05; 1.05; 1.05; 1.05]
# Functions to Choose Necessary Tank Size
H_Tank(V_ChemTank, V_SupplierChemTank, Dimensions_SupplierChemTank) :=
    i ← 0
    if V_ChemTank < V_SupplierChemTank[i]*Factor[i] and i < last(V_SupplierChemTank)
        return Dimensions_SupplierChemTank[:, 1][i]
    else
        while V_ChemTank ≥ V_SupplierChemTank[i]*Factor[i] and i < last(V_SupplierChemTank)
            i ← i + 1
        return Dimensions_SupplierChemTank[:, 1][i]
D_Tank(V_ChemTank, V_SupplierChemTank, Dimensions_SupplierChemTank) :=
    i ← 0
    if V_ChemTank < V_SupplierChemTank[i]*Factor[i] and i < last(V_SupplierChemTank)
        return Dimensions_SupplierChemTank[:, 0][i]
    else
        while V_ChemTank ≥ V_SupplierChemTank[i]*Factor[i] and i < last(V_SupplierChemTank)
            i ← i + 1
        return Dimensions_SupplierChemTank[:, 0][i]
# Coagulant Stock Tank Calculations
V_CoagTank := Ti_CoagStock*Q_CdcMax
H_CoagTank := H_Tank(V_CoagTank, V_SupplierChemTank, Dimensions_SupplierChemTank)
R_CoagTank := D_Tank(V_CoagTank, V_SupplierChemTank, Dimensions_SupplierChemTank)/2
# The vertical position of the coagulant tank must be high enough to provide enough hydraulic head to achieve the desired maximum chemical flow rate through the float valve orifice entering the constant head tank. This distance is given by H.CoagTankAboveHeadTank, and is added to the elevation of the water level in the constant head tank to find the elevation of the stock tank outlet.
#
# The elevation of the water level in the constant head tank is a height H.DoserAssembly above the top of the entrance tank wall. This height depends on the hardware used to mount the lever arm, which dictates the level of the end of the dosing tube at zero flow and therefore the CHT elevation. Here a conservative (large) estimate of this height should be used to ensure the system has sufficient hydraulic head.
#
# The actual bottom of the stock tank is a height B.StockOutlet below the outlet to provide space for solids to settle in the bottom of the tank.
#
# See the dimensioned diagram below.
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# Chlorine Stock Tank Calculations
C_ChlorineDoseMax =  # no stored result
Ti_ChlorineStock =  # no stored result
C_ChlorineStock =  # no stored result
Q_ChlorineMax := Q_Plant*C_ChlorineDoseMax/C_ChlorineStock
V_ChlorineTank := Ti_ChlorineStock*Q_ChlorineMax
H_ChlorineTank := H_Tank(V_ChlorineTank, V_SupplierChemTank, Dimensions_SupplierChemTank)
R_ChlorineTank := D_Tank(V_ChlorineTank, V_SupplierChemTank, Dimensions_SupplierChemTank)/2
# Filter Coagulant Stock Tank Calculations
C_FilterCoagDoseMax =  # no stored result
Ti_FilterCoagStock =  # no stored result
C_FilterCoagStock =  # no stored result
Q_FilterCoagMax := Q_Plant*C_FilterCoagDoseMax/C_FilterCoagStock
V_FilterCoagTank := Ti_FilterCoagStock*Q_FilterCoagMax
H_FilterCoagTank := H_Tank(V_FilterCoagTank, V_SupplierChemTank, Dimensions_SupplierChemTank)
R_FilterCoagTank := D_Tank(V_FilterCoagTank, V_SupplierChemTank, Dimensions_SupplierChemTank)/2
H_FilterCoagTank := H_ChlorineTank
# Defined to allow for mirroring of plumbing code to work even when filter coagulant tanks should be a size smaller (51 L/s to 54 L/s). Should be changed once the functions determining size of the chlorine tanks and the filter coagulant tanks are more properly defined; this will require the code for the plumbing from the two sets of tanks to be coded individually instead of the currently used mirror function.
R_FilterCoagTank := R_ChlorineTank
W_EtChemPlatform := max(4*(R_CoagTank + T_ChemTankWall) + 3*S_ChemTankBorder, 4*(R_FilterCoagTank + T_ChemTankWall) + 2*S_ChemTankBorder + W_HumanMin, 4*(R_ChlorineTank + T_ChemTankWall) + 2*S_ChemTankBorder + W_HumanMin)
L_EtChemPlatform := max(2*R_CoagTank + 4*R_FilterCoagTank + 6*T_ChemTankWall + 4*S_ChemTankBorder, 2*R_CoagTank + 4*R_ChlorineTank + 6*T_ChemTankWall + 4*S_ChemTankBorder)
