# Drain Channel Design
# Drain Channel Capacity Estimates
# To calculate the maximum possible flow through the drainchannel, all tanks are assumed to be initially full and empying in the same time
# Note that: the tank heights are used instead of the water levels in the calculation of maximum flow to have a conservative design.
# considering max flow for filter draining to be negligible since there isn't much head between the backwash box water level and the drain channel
Q_TankDrainMax := Q_pipeminor(innerdiameter(ND_EtDrain, PS_Default), H_Et, K_PipeEnt + K_PipeExit)*(N_EtFullHopper + 1) + Q_pipeminor(innerdiameter(ND_FlocValve, PS_Default), H_Floc, K_PipeEnt + K_PipeExit)*(last(Y_FlocDrainValves) + 1) + Q_pipeminor(innerdiameter(ND_SedSludgePipe, PS_Default), H_Sed, K_PipeEnt + K_PipeExit)*N_SedBays*N_SedTanks
Q_EtDCMax := Q_pipeminor(innerdiameter(ND_EtDrain, PS_Default), H_Et, K_PipeEnt + K_PipeExit)*(N_EtFullHopper + 1) + Q_Plant
Q_PlantDCMax := Q_TankDrainMax + Q_Plant + N_Fi*(1 + N_Fi > 1)*Q_FiSiphonMax
# Drain Channel Dimensions
L_EtDC := L_Et + T_PlantWall
L_PlantDC := W_Et + T_PlantWall + W_EtWalkway + N_SedTanks*(N_SedBays*W_SedBay + T_PlantWall) + W_FlocChannel*N_FlocChannels + (N_FlocChannels + 1)*T_PlantWall
W_PlantDC := W_DCWalkway
H_PlantDC := H_HorizChannelMin(Q_PlantDCMax, W_PlantDC, L_PlantDC, Nu_Water, E_Concrete, 1)
H_EtDC := H_HorizChannelΠMin(Q_EtDCMax, Π_Rectangular, L_EtDC, Nu_Water, E_Concrete, 1)
# Both the functions that are used to calculate the height for both drainchannels require manifold as an input. Manifold is a binary variable and is set as 1 currently
W_EtDC := W_HorizChannelΠMin(Q_EtDCMax, Π_Rectangular, L_EtDC, Nu_Water, E_Concrete, 1)
