# [reference: MasterProgram.mcdx]
# List of parameters to check
# Manual checks for debugging code
# 1. Make sure there are no references in the files (except Master Program)
# 2. Make sure the references have been updated on Master Program.
# Check that the file referenced is correct
# Click on the reference and hit the F9 button to update a reference
# Hit Ctrl+F9 to update all references in a file.
# 3. Make sure updated files have been saved before they are referenced.
# 4. Check that the value of Q.Plant is correct.
Q_Plant =  # no stored result
Q_PlantLocal =  # no stored result
ErrorText := "This is the complete list of errors"
# Checks that will output error instead of design files | How make output file?
# Flocculator
ED_FlocMin := □*mW/kg
ED_FlocRange := [5; 10]*mW/kg
ED_FlocMax := □*mW/kg
ErrorED :=
    if ED_FlocChannel < ED_FlocMin or ED_FlocChannel > ED_FlocMax
        ErrorED ← 1
    else
        ErrorED ← 0  # Then say overall Error is 1 if ErrorED or ErrorS or (all error variables)=1
CP_FlocMax := □
CP_FlocMin := □  # Check CP.FlocTotal
Error(Variable, VariableRange, VariableName, ErrorText) :=
    if Variable < VariableRange[0] or Variable > VariableRange[1]
        Error ← 1
    else
        Error ← 0
    ErrorText ← concat(ErrorText, vec2str([13]), VariableName, " is out of range")
    return ErrorText
ErrorS :=
    if S_FlocBaffleH < S_FlocBaffleMin and Horiz == 1
        ErrorS ← 1
    else
        ErrorS ← 0
vectorize(N_FlocChannelSpaces*S_FlocBaffle) + (N_FlocChannelSpaces - 1)*T_FlocBaffle  # Error if each length not same as L.Sed (have to do loop)
ErrorText := Error(5*mW/kg, ED_FlocRange, "ED.FlocChannel", ErrorText)
# Ideas of user inputs to put constraints on:
#
# ED.Floc
# CP.Floc
# T.ConcreteMin (minimum =plastic sheet thickness? but what if use different  material?) (Could have different values for plastic vs. concrete) If too large could make spacing wacky.
# H.PlantFreeboard
# T.PlantWall
# acad.version (since drawing explodes if the version is too early)
# Q.Plant (see what the lowest and highest flow rates our plants can handle are?), but this depends on other parameters?
# W.FlocChannelMin (find values for really small and large people)
# Ideas of calculated variables to put constraints on
#
# Height of flocculator
# ED.Floc
# CP.Floc
# head loss
# Ti.Floc (residence time)
ErrorText =  # no stored result
ErrorText := Error(5*mW/kg, ED_FlocRange, "ED.FlocChannel", ErrorText)
# Inlet channel
# maximum velocity
# Sed Tank
# V.Up
# Head loss through launder orifice
# head loss in launder pipe
# Energy dissipation rate in jet leaving manifold
# Velocity in manifold
# Vc in plate settlers
ErrorText =  # no stored result
# Waste channel
# some measure of head loss
# Outlet channel head loss
