N_rows := Π_Lfomorifice  # Rows of Orifices in the LFOM, currently set expert inputs
# Height of each row
S_LfomRows := H_dmax/N_rows
# The diameter of the orifices cannot be greater than the height of each row
D_LfomOrificeMax := S_LfomRows
# Step 1: Calculate the minimum diameter of the LFOM pipe:
# 1.  A stout is a theoretical weir with width proportional to .  Practically this is impossible to create because width goes to infinity as height goes to zero.  However, this gives the equation that both the LFOM and sutro weir look to copy.  Therefore we use the stout weir equation to model the LFOM y(x) =  = .
# 2. We Solve for alpha using the flow equation flow(height)=  at max height and setting equal to .
Flow_overAlpha := sqrt(2*g)*Pi_VenaContractaOrifice*integral(sqrt(H_dmax - x)*1/sqrt(x), x = 0*m .. H_dmax)
α_Lfom := Q_Plant/Flow_overAlpha
α_Lfom =  # no stored result
y(x) := α_Lfom/sqrt(x)
# 3. To calculate  calculate the average velocity at the bottom we weight the falling velocity from each height  by the amount of flow at that height and deviding by
#
# Thus we get:
V_LfomExit := 2*g*Pi_VenaContractaOrifice/Q_Plant*integral(sqrt(x*(H_dmax - x))*y(x), x = 0*m .. H_dmax)
# Note that  is the speed of the falling water for all LFOMS of height 20 cm, regardless of total flow through the plant.  Even for flow as low as  the percent error at each test location is less than 2%
V_LfomExit =  # no stored result
# 4. we need the average velocity at the bottom to be greater than the Q.Plant/Area, so we can then solve for minArea and thus the minimum diameter
A_LfomSafe := Π_LfomSafety*Q_Plant/V_LfomExit
D_LfomMin := 2*sqrt(A_LfomSafe/π)
D_LfomMin =  # no stored result
ND_Lfom := NominalDiameter(D_LfomMin, PS_Default)
ND_Lfom =  # no stored result
ND_Lfom =  # no stored result
ND_RMPipe := ND_Lfom
# Step 2: Define the simple formulas for calculating flow from an Orifice Array
# This is the area of the Stout weir corresponding to the top row of orifices. We will set the orifice size to be smaller than this area so that there is at least one orifice in the top row.
A_LfomToprow := integral(y(x), x = H_dmax - S_LfomRows .. H_dmax)
D_LfomToprowMax := 2*sqrt(A_LfomToprow/π)
D_LfomOrifices := FloorNearest(min(D_LfomOrificeMax, D_LfomToprowMax), D_Drill)
# We want as large orifices as possible to reduce the number of orifices needed to be drilled.  Note that for very small
# The area of each orifice multiplied by the Vena Contracta Coefficient
A_LfomOrifices := π*(D_LfomOrifices/2)^2*Pi_VenaContractaOrifice
# The additional height of the center of the orifice above each testing location.  This is just the diameter/2 because the bottom of the orifice is tangential to the test height. (this gives a correct zero level)
H_LfomOrificeCenter := D_LfomOrifices/2
N_LfomMaxOrificesperRow := floor(π*ND_Lfom/(2*D_LfomOrifices))
# A bound on the number of orifices allowed in each row.  We want a the distance between each orifice equal to the orifice diameter
H_LfomOrifice :=
    array[N_rows - 1] ← 0
    for i ∈ 0 .. last(array)
        array[i] ← i*S_LfomRows + H_LfomOrificeCenter
    return array
# The height locations of the center of the orifices.  Necessary for calculating height difference.  Also, this is passed to the design tool so that the orifices can be drawn at the correct heights
FlowOutSingle(RowIn, RowOut) :=
    heightDiff ← (RowIn + 1)*S_LfomRows - H_LfomOrifice[RowOut]
    if heightDiff < 0
        heightDiff ← 0
    Velocity ← sqrt(2*g*heightDiff)
    Q_singleOrifice ← Velocity*A_LfomOrifices
    return Q_singleOrifice
# FlowOutSingle calculates the amount of flow out of a single orifice in row #RowOut when the water is just enough to submerge row # RowIn.  Thus  is positive and nonzero
TotalFlow_fromRowNumber(WaterRowHeight, Orificearray) :=
    total ← 0
    for i ∈ 0 .. WaterRowHeight
        total ← total + FlowOutSingle(WaterRowHeight, i)*Orificearray[i]
    return total
# This calculate the total flow through the LFOM when the water just submerges the inputed row.  WaterRowHeight can be viewed as the number of rows submerged.
TotalFlow_vector(orificeArray) :=
    OutFlow[last(orificeArray)] ← 0
    for i ∈ 0 .. last(OutFlow)
        OutFlow[i] ← TotalFlow_fromRowNumber(i, orificeArray)
    return OutFlow
# TotalFlow.vector simply calculates a vector where each cell is equal to the amount of total flow when water is at that height.
# Step 3: Define helpful variables for the algorithm
# This simply finds the flow after each row if the algorith was perfect and had a perfectly linear relationship.  We am to get as close to this value at each row in the algorithm, and then pick the best orifice array at the end by minimizing mean squared error (MSE) to this value.
TargetFlow :=
    Flow[N_rows - 1] ← 0
    for i ∈ 0 .. last(Flow)
        Flow[i] ← (i + 1)*Q_Plant/N_rows
    return Flow
TargetFlow =  # no stored result
Q_LfomScale :=
    Flow[N_rows] ← 0
    for i ∈ 0 .. N_rows
        Flow[i] ← i*Q_Plant/N_rows
    return Flow
Q_LfomScale =  # no stored result
TempOrificeArray[N_rows - 1] := 0
# TempOrificeArray is an array of zeros that has the same size as the number of rows in the LFOM.  We pass this to the algorithm.
TempOrificeArray =  # no stored result
# incrementHoleOnLevel is the increased flow from adding a single orifice in the top row that is submerged.  Thus given the orifices below a certain row, we can find the ideal additional orifices on that row.
incrementHoleOnLevel := FlowOutSingle(1, 1)
# Step 4: Functions for the Algorithm
# 1) At each row, the fractional number of orifices needed to meet the targetflow array is calculated.
# 2)Because using either the floor or ceil of this number will effect values of flow rates for heigher rows, we recursivly call the algorithm for both values.
# 3)Once we go deep enough into the recursion that we have calculated the orifice number for each row, we calculate the mean squared error for that array, as well as the past best array, and return the array that gives the lower MSE.
MSE(flowArray) :=
    sum ← 0
    for i ∈ 0 .. last(flowArray)
        sum ← sum + (flowArray[i] - TargetFlow[i])^2
    return sum
# Simply the Mean Squared Error of a flow array compared to the TargetFlow array
pickBetterEstimator(testingArray, bestArray) :=
    testingFlow ← TotalFlow_vector(testingArray)
    bestFlow ← TotalFlow_vector(bestArray)
    if MSE(bestFlow) > MSE(testingFlow)
        toReturn ← testingArray
    else
        toReturn ← bestArray
    return toReturn
# returns the array with the lower MSE.
pickBottom(testingArray, level) :=
    previousFlow ← TotalFlow_fromRowNumber(level, testingArray)
    additionalFlow ← TargetFlow[level] - previousFlow
    bottom ← floor(additionalFlow/incrementHoleOnLevel)
    bottom ← max(0, bottom)
    bottom ← min(N_LfomMaxOrificesperRow - 1, bottom)
    return bottom
# pickBottom takes the floor of the ideal ratio for additional orifices required.  thus we can add one to get the ceil of this value
N_LfomMaxOrificesperRow =  # no stored result
# This is where everything happens:
# If we have calculated each row, we return the new better estimator
#
# otherwise:
# set the current row to either the floor or ceil of the ideal number(a ratio) or orifices for that row
# call the function for the next level, using each value in turn
# and return the current best array we have calculated.
recurseEstimator(testingArray, bestArray, level) :=
    if level > last(testingArray)
        toReturn ← pickBetterEstimator(testingArray, bestArray)
    else
        if level ≤ last(testingArray)
            bottom ← pickBottom(testingArray, level)
            for i ∈ bottom .. bottom + 1
                tempArray ← testingArray
                tempArray[level] ← i
                bestArray ← recurseEstimator(tempArray, bestArray, level + 1)
            toReturn ← bestArray
    return toReturn
# Call the function with TempOrificeArray at the zero level.  Our LFOM Array that is calculated is
N_LfomOrifices := recurseEstimator(TempOrificeArray, TempOrificeArray, 0)
N_LfomOrifices =  # no stored result
# Step 5: Analysis of N.LfomOrifices
# The total flow when water just submerges each row.
FlowBestEstimate := TotalFlow_vector(N_LfomOrifices)
AddZeroforGraph(array) :=
    temp[rows(array)] ← 0
    for i ∈ 1 .. last(temp)
        temp[i] ← array[i - 1]
    return temp
# This adds the (0,0) value to the flow arrays for graphing
EstimateGraph := AddZeroforGraph(FlowBestEstimate)
# The two arrays to be graphed
IdealGraph := AddZeroforGraph(TargetFlow)
H_testlocations :=
    temp[last(EstimateGraph)] ← 0
    for i ∈ 0 .. last(temp)
        temp[i] ← i*S_LfomRows
    return temp
# The height values after each row.  This includes zero height
xi := 0 .. last(EstimateGraph)  # Variable tool used for graphing
# [plot: IdealGraph[xi]/(L/s), EstimateGraph[xi]/(L/s) vs H_testlocations[xi]/cm]
PercentError := (FlowBestEstimate - TargetFlow)/TargetFlow*100  # For all values exept for the zero value, which has no error
PercentErrorGraph := AddZeroforGraph(PercentError)
# [plot: PercentErrorGraph[xi] vs H_testlocations[xi]/cm]
