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# I propose that we make all dosers using the 1/8" tubing.
# We need a design that makes it easy to install different numbers of dosing tubes.
# At a certain number of dosing tubes it will be necessary to switch to a different float valve. We need to identify that transition and at that transition it would make sense to switch to larger diameter feed tubes for the CHT.
C_CoagMax := 60*mg/L
Pi_CdcError := 10%
HL_CdcTube := 20*cm
D_CdcTube := 1/8*in
K_Minor := 4
Nu_Water := 1*mm^2/s
C_CoagStockMax := 300*gm/L
Q_CdcMax := Q_Plant*C_CoagMax/C_CoagStockMax
Q_ChlorCdcMax := Q_Plant*C_ChlorineDoseMax/C_ChlorineStock
Q_FCCdcMax := Q_Plant*C_FilterCoagDoseMax/C_FilterCoagStock
Nu_Alum(C_Alum) := (1 + 4.255*10^-6*(C_Alum/(kg/m^3))^2.289)*Nu_Water
Nu_PACl(C_PACl) := (1 + 2.383*10^-5*(C_PACl/(kg/m^3))^1.893)*Nu_Water
Nu_Coag(C_Coag, EN_Coag) :=
    if EN_Coag == 0
        Nu ← Nu_Alum(C_Coag)
    else
        Nu ← Nu_PACl(C_Coag)
    return Nu
Q_KError(D, HL_Max, K_Minor, Pi_CdcError) := π*D^2/4*sqrt(2*(1 - Pi_CdcError)*Pi_CdcError*HL_Max*g/K_Minor)
# Length of tube required to get desired head loss at maximum flow based on the Hagen-Poiseuille equation with minor losses.
L_tube(Q_max, D, h_lmax, ν, K_Minor) := (h_lmax*g*π*D^4/Q_max - K_Minor*8*Q_max/π)/(128*ν)
Q_CoagCdcDosingTube := Trunc(Q_KError(D_CdcTube, HL_CdcTube, K_Minor, Pi_CdcError), 1*mL/s)
N_CoagCdcTubes := ceil(C_CoagMax*Q_Plant/(C_CoagStockMax*Q_CoagCdcDosingTube))
N_ChlorCdcTubes := ceil(C_ChlorineDoseMax*Q_Plant/(C_ChlorineStock*Q_CoagCdcDosingTube))
N_FilterCoagCdcTubes := ceil(C_FilterCoagDoseMax*Q_Plant/(C_FilterCoagStock*Q_CoagCdcDosingTube))
Q_CoagStock := 2*mL/s*N_CoagCdcTubes
Q_ChlorStock := 2*mL/s*N_ChlorCdcTubes
Q_FilterCoagStock := 2*mL/s*N_FilterCoagCdcTubes
C_CoagStock := C_CoagMax*Q_Plant/Q_CoagStock
L_CoagCdcTube := L_tube(Q_CoagStock/N_CoagCdcTubes, D_CdcTube, HL_CdcTube, Nu_Coag(C_CoagStock, EN_Coag), K_Minor)
L_ChlorCdcTube := L_tube(Q_ChlorStock/N_CoagCdcTubes, D_CdcTube, HL_CdcTube, Nu_Water, K_Minor)
L_FilterCoagCdcTube := L_tube(Q_FilterCoagStock/N_CoagCdcTubes, D_CdcTube, HL_CdcTube, Nu_Coag(C_FilterCoagStock, EN_Coag), K_Minor)
# Need the following...
# select correct Kerick valve based on coag flow and allowable head loss between stock tank and constant head tank
# Select flexible tubing size between stock tank and CHT.
# Select connectors/adaptors required.
D_FltVlvOrificesAvail := [0.093*in; 0.187*in; 0.25*in; 0.312*in]
D_FloatValveOrifice :=
    i ← 0
    while h_orifice(D_FltVlvOrificesAvail[i], Pi_VenaContractaOrifice, Q_CdcMax) ≥ H_CoagTankAboveHeadTank
        i ← i + 1
    return D_FltVlvOrificesAvail[i]
D_FloatValveOrifice =  # no stored result
HL_FloatValveOrifice := h_orifice(D_FloatValveOrifice, Pi_VenaContractaOrifice, Q_CdcMax)
L_TubeStockToCHEst := 1*m
HL_TubeStockToCHMax := H_CoagTankAboveHeadTank - HL_FloatValveOrifice
D_TubeStockToCHEst := (128*Nu_Water*L_TubeStockToCHEst*Q_CdcMax/(π*g*HL_TubeStockToCHMax))^(1/4)
D_TubeStockToCH := max(3/8*in, D_TubeStockToCHEst)
# Use 3/8" tubing to connect the stock tank/calibration column to the constant head tank unless a larger tube is needed (which it probably never will be).
# Lever Arm Scale
HL_Cdc =  # no stored result  # Difference between the min and max water levels in the entrance tank. Maximum head loss through the LFOM.
L_LeverArmTotal := 36*in  # Set to be this length.
L_SliderEffective := 3.5*in  # Distance between the end of the slider and the pivot point of the freefall PVC tube.
L_LeverArmEffective := L_LeverArmTotal - L_SliderEffective
# The maximum elevation the doser tube will drop when the slider is at the end of the bar at max plant flow.
H_Max := 20*cm
# To find the length of the side of the arm with the scale and the side of the arm with the float attached, solve two equations for two unknowns. One equation is similar triangles at maximum flow. The other is that the two sides of the bar must add up to the total.
L_ScaleArmEffective := L_LeverArmEffective/(1 + HL_Cdc/H_Max)
1.75*2.54 =  # no stored result
L_CdcScaleArm := L_ScaleArmEffective + L_SliderEffective
L_CdcScaleArm =  # no stored result
L_CdcFloatArm := L_LeverArmTotal - L_CdcScaleArm
L_CdcFloatArm =  # no stored result
# Not necessarily important.
Angle_LeverArmMax := asin(HL_Cdc/L_CdcFloatArm)
L_SliderEffective := 3*in
# This is the distance between the end of the slider and the point where the freefall PVC is hung. (it's not drawn at exactly 3", but we'll change that. the drawing was arbitrary initially).
# This is the minumum distance the first tick mark can be from the lever arm pivot point in order for the PVC assembly to have enough clearance from the entrance tank wall.
L_WallClearance := L_HalfWall + L_Slider - L_SliderEffective + L_Extra
# This is the elevation difference between the point where the freefall PVC assembly is hung and the point where the end of the tube rests. The horizontal PVC has an outer radius of .525" and the tool hangar likely adds another .5".
#
# This is only significant in zeroing the CHT. It shouldn't effect the lever arm scale because it's a constant.
H_PVCAssembly := 1*in
L_CdcDtDesign =  # no stored result
# This is the minumum tube head loss when the lever arm is at max angle (max plant flow) and the dose is at a minumum, which corresponds to the first point on the scale.
H_MinDoseMaxFlow := 128*Nu_Water*L_CdcDtDesign*Q_CdcCoagulantMinMax/(g*π*ID_CdcTube^4)
# This is the distance between the first tick mark and the pivot point along the lever arm. It must be greater than L.WallClearance in order for the PVC assembly to be far enough from the tank wall.
L_FirstPoint := H_MinDoseMaxFlow/sin(Angle_LeverArmMax) + L_SliderEffective
