# Automated Materials List
# **This is for vertical flocculator; Calculate for horizontal in the future**
# Sedimentation Tank Plates
N_SedPlatesTotal := N_SedPlates*N_SedBays*N_SedTanks
# ***Purple variables are verified***
N_SedPlatesPerSheet := floor(L_SedPlateSheet/L_SedPlate)
N_SedPlateSheets := ceil(N_SedPlatesTotal/N_SedPlatesPerSheet)
# Floc Channel and Tank Walls
A_FlocFloor := (L_Sed + 2*T_PlantWall)*(W_FlocChannel*N_FlocChannels + T_PlantWall*(N_FlocChannels + 1))
A_FlocWalls := ((H_Floc*L_Sed) - (H_FlocPort[N_FlocChannels - 1]*W_FlocPort[N_FlocChannels - 1])) + (L_Sed*H_Floc) + ((N_FlocChannels*W_FlocChannel + ((N_FlocChannels + 1)*T_PlantWall))*H_Floc) + ((N_FlocChannels - 1)*((L_Sed*H_Floc) - (H_FlocPort[0]*W_FlocPort[0])))
Vol_FlocFloor := A_FlocFloor*T_PlantWall
Vol_FlocWalls := A_FlocWalls*T_PlantWall
# Sed Tank Components
A_SedWalls := (N_SedTanks + 1)*(L_Sed*H_Sed - ((H_ExitChannel*W_ExitChannel) + (H_InletChannel*W_InletChannel))) + ((N_SedTanks*W_Sed) + ((T_PlantWall*(N_SedTanks + 1))*2))*H_Sed
Vol_SedWalls := A_SedWalls*T_PlantWall
A_SedFloor := (L_Sed + 2*T_PlantWall)*(N_SedTanks*W_Sed + (N_SedTanks + 1)*T_PlantWall)
Vol_SedFloor := A_SedFloor*T_PlantWall
# Entrance Tank Components
A_EtWalls := 2*(H_Et*(L_Et + (2*T_EtWall))) + 2*(H_Et*W_Et)
A_EtFloor := (W_Et + 2*T_EtWall)*(L_Et + 2*T_EtWall)  # Surface area of Tank floor
Vol_EtWalls := A_EtWalls*T_EtWall
Vol_EtFloor := A_EtFloor*T_EtWall
Vol_EntranceTank := Vol_EtFloor + Vol_EtWalls  # Volume of concrete needed to build Entrance Tank
N_EtDrainStoppers := N_Et.Hoppers
N_EtDrains := N_Et.Hoppers
L_EtWeir =  # no stored result
D_EtWeir =  # no stored result
# Volume for the hoppers
Vol_HoppersBetween := 3*W_Et*H_EtHopper^2*1/sqrt(3) + H_EtHopper*(4*ND_Rebar + T_ConcreteMin)*W_Et
W_HopperBottom := W_Et - OuterDiameterFittingPVC(ND_EtDrain) - 2*S_Fitting
Vol_HoppersAgainstEtWall := 3*(L_EtHopper*W_HopperBottom^2*sqrt(3)/2 - W_HopperBottom^2*sqrt(3)*(L_EtHopper - OuterDiameterFittingPVC(ND_EtDrain) - 2*S_Fitting)/3)
Vol_Hoppers := Vol_HoppersBetween + Vol_HoppersAgainstEtWall
# ***Turquoise variables are intermediate variables***
L_InletTank := S_Elbow + ElbowRadius(ND_PltWeir) + ConRadius(ND_PltWeir) + SocketDepth(ND_PltWeir)
W_InletTank := ((2*ConRadius(ND_PltWeir)) + (2*S_Elbow))
Vol_InletTankWalls := (((L_InletTank + 2*T_ChannelWall)*(W_InletTank + 2*T_ChannelWall)) - (L_InletTank*W_InletTank) - ((L_InletTank - T_ChannelWall)*T_ChannelWall))*H_InletChannel
A_InletTankFloor := (W_InletTank + 2*T_ChannelWall)*(L_InletTank + 2*T_ChannelWall)
Vol_InletTankFloor := A_InletTankFloor*T_ChannelWall
Vol_InletChannelTank := Vol_InletTankFloor + Vol_InletTankWalls
L_ExitTank := S_Elbow + ElbowRadius(ND_PltWeir) + ConRadius(ND_PltWeir) + SocketDepth(ND_PltWeir)
W_ExitTank := 4*ConRadius(ND_PltWeir) + 3*S_Elbow
A_ExitTankWalls := (L_ExitTank*T_ChannelWall) + 2*((W_ExitTank + 2*T_ChannelWall)*T_ChannelWall)
Vol_ExitTankWalls := A_ExitTankWalls*H_ExitChannel
A_ExitTankFloor := (L_ExitTank + 2*T_ChannelWall)*(W_ExitTank + 2*T_ChannelWall)
Vol_ExitTankFloor := A_ExitTankFloor*T_ChannelWall
# Exit and Inlet Channel Components
Vol_ExitChannelTank := Vol_ExitTankFloor + Vol_ExitTankWalls
A_ExitChannelWalls := L_Channel*(H_ExitChannel + T_ChannelWall)
# **Area and Volume of the walls are only for the INSIDE wall; the outside wall is already inlcuded in the area and volume of the sed walls.**
A_ExitChannelFloor := L_Channel*W_ExitChannel
Vol_ExitChannelWalls := A_ExitChannelWalls*T_ChannelWall
Vol_ExitChannelFloor := A_ExitChannelFloor*T_ChannelWall
A_InletChannelWalls := L_Channel*(H_InletChannel + T_ChannelWall)
A_InletChannelFloor := L_Channel*W_InletChannel
Vol_InletChannelWall := A_InletChannelWalls*T_ChannelWall
Vol_InletChannelFloor := A_InletChannelFloor*T_ChannelWall
# Sed Tank Slopes
# **Cross Sectional Area of One Slope**
A_SedSlope := Z_SedSlopes*(W_SedBay - W_SedSludge)/2
A_SedSlopes := A_SedSlope*N_SedBays*N_SedTanks
Vol_SedSlopes := A_SedSlopes*L_Sed
# Ferrous Cement/Plastic Baffles
Vol_DistributionTunnelCovers := T_SedSlopePlate*L_SedSlopeManifold*W_SedSlopePlate*N_SedPorts
A_DistributionTunnelCovers := Vol_DistributionTunnelCovers/T_SedSlopePlate
# If  then use ferrous cement, if not use plastic baffles.
# Logic taken from flow chart in Floc3 code.
Vol_FlocBafflesTotal :=
    if P_FlocChannelMin > P_FlocChannelVPlastic
        (W_FlocChannel*T_FlocBaffle*(L_FlocBaffleLower*ceil(N_FlocChannelBaffles/2) + L_FlocBaffleUpper*floor(N_FlocChannelBaffles/2)))
    else
        0*m^3
Vol_FlocBafflesTotal =  # no stored result
P_FlocChannelMin =  # no stored result
P_FlocChannelVPlastic =  # no stored result
A_FlocBafflesTotal := Vol_FlocBafflesTotal/T_FlocBaffle
# **new variable defined here**
A_FlocBafflesTotal =  # no stored result
# Pipes and Valves of Sed Tank
N_PipeSedPlateFrame := W_Sed/B_SedPipe - 1 + L_Sed/B_SedPipe - 1
L_PipeSedPlateFrameTotal := N_SedTanks*((W_Sed/B_SedPipe - 1)*L_Sed + (L_Sed/B_SedPipe - 1)*W_Sed)
# Length of pipe needed for Sedimentation Tank Plate Frame at ND.SedPlateFrame
L_Weir := 2*H_PltWeir  # Total length of Weir pipe in Inlet and Exit Channel Tanks at ND.PltWeir
L_SedLaunder =  # no stored result
N_Launders := N_SedTanks*N_SedBays*N_SedLaunders
L_LaunderPipeTotal := L_SedLaunder*N_Launders
N_LaunderCouplings := N_Launders
# Number of couplings for launder pipe going through concrete wall
N_Valves := N_SedBays*N_SedTanks
N_ValveCouplings := N_Valves
# Filter Piping and Fittings
# To be completed once the pipes and fittings are drawn.
# Filter Box Floor and Walls
A_FilterWallsTotal := H_Fi*(3*W_Fi + 2*L_Fi)
# Chemical Storage Tanks
L_PVCPipeTotal := L_FirstPipe + L_SecondPipe + L_ThirdPipe + L_FourthPipe + L_FinalPipe
SA_PVCPipeTotal := 2*π*.840*L_PVCPipeTotal  # .840 inches is the actual outer diameter for a 1/2" PVC pipe
SA_CoagTank := 4*π*R_CoagTank^2
