CeilNearest(number, array) :=
    if number ≤ array[0] or number ≥ array[last(array)]
        x ← number
    else
        i ← 0
        while (number > array[i] and i < last(array))
            i ← i + 1
        x ← array[i]
    return x
# These "nearest" functions will return "number" for the case when the number is less than the smallest value in the array or greater than the largest value in the array
FloorNearest(number, array) :=
    if number ≤ array[0] or number ≥ array[last(array)]
        x ← number
    else
        i ← 0
        while (number > array[i] and i < last(array))
            i ← i + 1
        x ← array[i - 1]
    return x
RoundNearest(number, array) :=
    if number ≤ array[0] or number ≥ array[last(array)]
        x ← number
    else
        i ← 0
        while (number > array[i] and i < last(array))
            i ← i + 1
        if (number - array[i - 1]) > (array[i] - number)
            x ← array[i]
        else
            x ← array[i - 1]
    return x
LookupFloor(search, arrayin, arrayout) :=
    i ← 0
    while (search > arrayin[i] and i < last(arrayin))
        i ← i + 1
    return arrayout[i - 1]
# Returns value in second array corresponding to index in first array that is less than the search value
LookupCeil(search, arrayin, arrayout) :=
    i ← 0
    while (search > arrayin[i] and i < last(arrayin))
        i ← i + 1
    return arrayout[i]
# Returns value in second array corresponding to index in first array that is greater than the search value
LookupRound(search, arrayin, arrayout) :=
    i ← 0
    while (search > arrayin[i] and i < last(arrayin))
        i ← i + 1
    if (search - arrayin[i - 1]) > (arrayin[i] - search)
        Rounded ← i
    else
        Rounded ← i - 1
    return arrayout[Rounded]
# Returns value in second array corresponding to index in first array that is closest to the search value
Specialcase(range, interval) := range/interval - 1
Normalcase(range, interval) := range/interval
rampwithjump(initial, start, interval, range) :=
    ramp[0] ← initial
    if start ≥ interval
        end ← Normalcase(range, interval)
    else
        end ← Specialcase(range, interval)
    for i ∈ 1 .. end
        ramp[i] ← start + (i - 1)*interval
    return ramp
ramp(start, interval, range) :=
    for i ∈ 0 .. range/interval - 1
        ramp[i] ← start + i*interval
    return ramp
index(s, array) :=
    i ← 0
    while s > 1.0005*array[i] and i < last(array)
        i ← i + 1
    return i
index2(s, array) :=
    i ← 0
    while s ≠ array[i] and i < last(array)
        i ← i + 1
    return i
NextLargest(value, array) :=
    if array[last(array)] ≤ value
        FinalVal ← array[last(array)]
    else
        FinalVal ← array[0]
    i ← 0
    while array[i] < value and i < (rows(array) - 1)
        i ← i + 1
        FinalVal ← array[i]
    FinalVal
