# [reference: MasterProgram.xmcd]
# Automated Design: AutoCAD: Sedimentation Tank
N_SedTanks = 2
# Sedimentation Tank Inputs
N_SedBays = 1
L_SedInletSlope := L_Sed
Q_Plant = 0.00633426 m^3/s
L_SedTopInlet := (W_Sed/(2*N_SedBays))/cos(AN_SedTopInlet) = 0.92 m
L_SedTopInlet := L_SedSlopeManifold = 0.800718 m
B_SedPlateFramePipes := B_SedPipe
L_ChannelInlet := W_InletChannel + T_PlantWall
W_ChannelInlet := W_InletChannel
L_SedSlopeInlets := L_SedInletSlope
w_minchannelHL(H_SedWeirInlet, HW_InletChannel, Q_Plant, L_Channel, Nu_Water, E_Concrete, 1, HL_SedWeirInlet) = 0.0383785 m
# Dimension Values
channelbox_dim :=
    dim ← [W_InletChannel; (N_SedTanks*W_Sed) + ((N_SedTanks + 1)*T_PlantWall); H_InletChannel] if sedlayout == 2
    dim ← [W_InletChannel; N_SedTanks*(W_Sed + T_PlantWall); H_InletChannel] if sedlayout == 3
    return dim
echannelbox_dim := [W_ExitChannel; N_SedTanks*(W_Sed + T_PlantWall); H_ExitChannel]
channelinletbox1_dim := [T_PlantWall; L_ChannelInlet; H_InletChannel]
channelinletbox2_dim := [W_ChannelInlet; W_Sed; H_Sed]
sedbottombox_dim := [-L_Sed; W_Sed; T_PlantWall]
channelclosebox_dim := [W_InletChannel + T_ChannelWall + T_PlantWall; T_PlantWall; H_InletChannel + T_ChannelWall]
channelinletwall_dim := [T_ChannelWall; W_Sed; H_Sed]
echanneltank_dim := [
    S_Elbow + ElbowRadius(ND_PltWeir) + ConRadius(ND_PltWeir) + SocketDepth(ND_PltWeir);
    4*ConRadius(ND_PltWeir) + 3*S_Elbow;
    H_ExitChannel
]
echanneltankbox_dim := [
    -(S_Elbow + ElbowRadius(ND_PltWeir) + ConRadius(ND_PltWeir) + SocketDepth(ND_PltWeir));
    4*ConRadius(ND_PltWeir) + 3*S_Elbow;
    ConRadius(ND_PltWeir) + ElbowRadius(ND_PltWeir) + SocketDepth(ND_PltWeir)
]
ichanneltank_dim := [
    S_Elbow + ElbowRadius(ND_PltWeir) + ConRadius(ND_PltWeir) + SocketDepth(ND_PltWeir);
    (2*ConRadius(ND_PltWeir)) + (2*S_Elbow);
    H_InletChannel
]
ichanneltankbox_dim := [
    -(S_Elbow + ElbowRadius(ND_PltWeir) + ConRadius(ND_PltWeir) + SocketDepth(ND_PltWeir));
    (2*ConRadius(ND_PltWeir)) + (2*S_Elbow);
    ConRadius(ND_PltWeir) + ElbowRadius(ND_PltWeir) + SocketDepth(ND_PltWeir)
]
framewall_dim := [-L_Sed; W_SedFrameWall; -H_SedFrameWall]
slope_dim := [W_SedSlopePlate; L_SedSlopeManifold; T_SedInletSlope]
sedport_dim := [W_SedSlopePlate - W_SedPort; T_SedSlopePlate/tan(AN_SedPlate) + L_SedPort; T_SedInletSlope]
textbox_dim := [L_Sed/2; W_SedBay]
sedweirexit_dim := [W_SedWeirExit; H_SedWeirExit; T_SedSlopePlate] = [0.147426; 0.0994748; 0.04] m
sedweirinlet_dim := [W_SedWeirInlet; H_SedWeirInlet; T_SedSlopePlate] = [0.28352; 0.168136; 0.04] m
# Origins Points
channel_origin :=
    if sedlayout == 2
        origin ← [
            Plant_Origin[0] - L_Sed + W_InletChannel;
            Plant_Origin[1] - T_PlantWall;
            Plant_Origin[2] + H_Sed - H_InletChannel
        ]
    if sedlayout == 3
        origin ← [
            Plant_Origin[0] - L_Sed + W_InletChannel;
            Plant_Origin[1] - T_PlantWall;
            Plant_Origin[2] + H_Sed - H_InletChannel
        ]
    if sedlayout == 4
        origin ← [
            Plant_Origin[0] - L_Sed + W_ChannelInlet;
            Plant_Origin[1] - T_PlantWall;
            Plant_Origin[2] + H_Sed - H_InletChannel
        ]
    return origin
    = [-3.96555; -0.15; 1.22076] m
echannel_origin :=
    origin ← [0; 0; 0]*m
    origin ← [Plant_Origin[0]; Plant_Origin[1] - T_PlantWall; Plant_Origin[2] + H_Sed - H_ExitChannel] if sedlayout == 2
    if sedlayout == 3
        origin ← [
            Plant_Origin[0] - L_Sed + W_InletChannel + T_ChannelWall + W_ExitChannel;
            Plant_Origin[1] - T_PlantWall;
            Plant_Origin[2] + H_Sed - H_ExitChannel
        ]
    if sedlayout == 4
        origin ← [
            Plant_Origin[0] - L_Sed + W_ChannelInlet + T_ChannelWall + W_ExitChannel;
            Plant_Origin[1] - T_PlantWall;
            Plant_Origin[2] + H_Sed - H_ExitChannel
        ]
    return origin
channelinletwall_origin := [Plant_Origin[0] - L_Sed + W_ChannelInlet; Plant_Origin[1]; Plant_Origin[2]]
echanneltank_origin :=
    if sedlayout == 2
        origin ← [
            Plant_Origin[0];
            Plant_Origin[1] - T_PlantWall - (4*ConRadius(ND_PltWeir)) - (3*S_Elbow);
            Plant_Origin[2] + H_Sed - H_ExitChannel
        ]
    if sedlayout == 3
        origin ← [
            Plant_Origin[0] - L_Sed + W_InletChannel + T_ChannelWall + S_Elbow + ElbowRadius(ND_PltWeir) + ConRadius(ND_PltWeir) + SocketDepth(ND_PltWeir);
            Plant_Origin[1] - T_PlantWall - (4*ConRadius(ND_PltWeir)) - (3*S_Elbow);
            Plant_Origin[2] + H_Sed - H_ExitChannel
        ]
    origin
ichanneltank_origin :=
    if sedlayout == 2
        origin ← [
            (Plant_Origin[0] - L_Sed + W_InletChannel) + T_ChannelWall;
            Plant_Origin[1] - T_PlantWall - (2*ConRadius(ND_PltWeir)) - (2*S_Elbow);
            Plant_Origin[2] + H_Sed - H_InletChannel
        ]
    if sedlayout == 3
        origin ← [
            (Plant_Origin[0] - L_Sed + W_InletChannel) + T_ChannelWall;
            Plant_Origin[1] - T_PlantWall - (2*ConRadius(ND_PltWeir)) - (2*S_Elbow);
            Plant_Origin[2] + H_Sed - H_InletChannel
        ]
    origin
    = [-3.81555; -0.45193; 1.22076] m
channelbox_origin := [Plant_Origin[0] - L_Sed; Plant_Origin[1] - T_PlantWall; Plant_Origin[2] + H_Sed - H_InletChannel]
echannelbox_origin :=
    origin ← [0; 0; 0]*m
    if sedlayout == 2
        origin ← [
            Plant_Origin[0] - W_ExitChannel;
            Plant_Origin[1] - T_PlantWall;
            Plant_Origin[2] + H_Sed - H_ExitChannel
        ]
    if sedlayout == 3
        origin ← [
            Plant_Origin[0] - L_Sed + W_InletChannel + T_ChannelWall;
            Plant_Origin[1] - T_PlantWall;
            Plant_Origin[2] + H_Sed - H_ExitChannel
        ]
    if sedlayout == 4
        origin ← [
            Plant_Origin[0] - L_Sed + W_ChannelInlet + T_ChannelWall;
            Plant_Origin[1] - T_PlantWall;
            Plant_Origin[2] + H_Sed - H_ExitChannel
        ]
    return origin
channelinletbox1_origin := [
    Plant_Origin[0] - L_Sed - T_PlantWall;
    Plant_Origin[1] + (.5*W_Sed) - (.5*L_ChannelInlet);
    Plant_Origin[2] + H_Sed - H_InletChannel
]
channelinletbox2_origin := [Plant_Origin[0] - L_Sed; Plant_Origin[1]; Plant_Origin[2]]
channelclosebox_origin := [
    Plant_Origin[0] - L_Sed - T_PlantWall - W_InletChannel - T_ChannelWall;
    Plant_Origin[1] - T_PlantWall;
    Plant_Origin[2] + H_Sed - H_InletChannel - T_ChannelWall
]
sedtankinletweirelbow_origin := [
    Plant_Origin[0] - L_Sed + echanneltank_dim[0] - SocketDepth(ND_PltWeir) - ElbowRadius(ND_PltWeir);
    Plant_Origin[1] - T_PlantWall - S_Elbow - ConRadius(ND_PltWeir);
    Plant_Origin[2] + ElbowRadius(ND_PltWeir) + ConRadius(ND_PltWeir) - 2*ShortTeeLength(ND_PltWeir)
]
sedtankexitweirelbow_origin :=
    if sedlayout == 2
        origin ← [
            Plant_Origin[0] - SocketDepth(ND_PltWeir) - 2*ElbowRadius(ND_PltWeir);
            Plant_Origin[1] - T_PlantWall - S_Elbow - ConRadius(ND_PltWeir);
            Plant_Origin[2] + ElbowRadius(ND_PltWeir) + ConRadius(ND_PltWeir)
        ]
    if sedlayout == 3
        origin ← [
            Plant_Origin[0] - L_Sed + W_InletChannel + T_ChannelWall + echanneltank_dim[0] - SocketDepth(ND_PltWeir);
            Plant_Origin[1] - T_PlantWall - S_Elbow - ConRadius(ND_PltWeir);
            Plant_Origin[2] + ElbowRadius(ND_PltWeir) + ConRadius(ND_PltWeir)
        ]
    return ← origin
sedtankexitweirelbow2_origin :=
    if sedlayout == 2
        origin ← [
            Plant_Origin[0] - SocketDepth(ND_PltWeir);
            Plant_Origin[1] - T_PlantWall - 2*S_Elbow - 3*ConRadius(ND_PltWeir);
            Plant_Origin[2] + ElbowRadius(ND_PltWeir) + ConRadius(ND_PltWeir)
        ]
    if sedlayout == 3
        origin ← [
            Plant_Origin[0] - L_Sed + W_InletChannel + T_ChannelWall + echanneltank_dim[0] - SocketDepth(ND_PltWeir);
            Plant_Origin[1] - T_PlantWall - S_Elbow - ConRadius(ND_PltWeir);
            Plant_Origin[2] + ElbowRadius(ND_PltWeir) + ConRadius(ND_PltWeir)
        ]
    return ← origin
sedtankconnectingpipe_origin :=
    if sedlayout == 2
        origin ← [
            Plant_Origin[0] - SocketDepth(ND_PltWeir) - 2*ElbowRadius(ND_PltWeir);
            Plant_Origin[1] - T_PlantWall - S_Elbow - ConRadius(ND_PltWeir);
            Plant_Origin[2] + ConRadius(ND_PltWeir)
        ]
    if sedlayout == 3
        origin ← [
            Plant_Origin[0] - L_Sed + W_InletChannel + T_ChannelWall + echanneltank_dim[0] - SocketDepth(ND_PltWeir);
            Plant_Origin[1] - T_PlantWall - S_Elbow - ConRadius(ND_PltWeir);
            Plant_Origin[2] + ConRadius(ND_PltWeir)
        ]
    return ← origin
exitweirpipecopy1_point :=
    if sedlayout == 2
        point ← [
            Plant_Origin[0] - SocketDepth(ND_PltWeir) - ElbowRadius(ND_PltWeir) - innerR(ND_PltWeir, EN_PipeSpec);
            Plant_Origin[1] - T_PlantWall - S_Elbow - ConRadius(ND_PltWeir);
            Plant_Origin[2] + ConRadius(ND_PltWeir) + ElbowRadius(ND_PltWeir)
        ]
    if sedlayout == 3
        point ← [
            Plant_Origin[0] - L_Sed + W_InletChannel + T_ChannelWall + echanneltank_dim[0] - SocketDepth(ND_PltWeir) - ElbowRadius(ND_PltWeir) - innerR(ND_PltWeir, EN_PipeSpec);
            Plant_Origin[1] - T_PlantWall - S_Elbow - ConRadius(ND_PltWeir);
            Plant_Origin[2] + ConRadius(ND_PltWeir) + ElbowRadius(ND_PltWeir)
        ]
    return point
exitweirpipecopy2_point :=
    if sedlayout == 2
        point ← [
            Plant_Origin[0] - SocketDepth(ND_PltWeir) - ElbowRadius(ND_PltWeir) - innerR(ND_PltWeir, EN_PipeSpec);
            Plant_Origin[1] - T_PlantWall - 2*S_Elbow - 3*ConRadius(ND_PltWeir);
            Plant_Origin[2] + ConRadius(ND_PltWeir) + ElbowRadius(ND_PltWeir)
        ]
    if sedlayout == 3
        point ← [
            Plant_Origin[0] - L_Sed + W_InletChannel + T_ChannelWall + echanneltank_dim[0] - SocketDepth(ND_PltWeir) - ElbowRadius(ND_PltWeir) - innerR(ND_PltWeir, EN_PipeSpec);
            Plant_Origin[1] - T_PlantWall - 2*S_Elbow - 3*ConRadius(ND_PltWeir);
            Plant_Origin[2] + ConRadius(ND_PltWeir) + ElbowRadius(ND_PltWeir)
        ]
    return point
sedtankinletpipe1_origin := [
    Plant_Origin[0] - L_Sed + (.5*W_InletChannel);
    Plant_Origin[1] + (W_Sed/(2*N_SedInletPipes*N_SedBays));
    Plant_Origin[2] + H_Sed - H_InletChannel
]
inletweirpipe_origin := [
    Plant_Origin[0] - L_Sed + S_Elbow + ConRadius(ND_PltWeir);
    Plant_Origin[1] - T_PlantWall - S_Elbow - ConRadius(ND_PltWeir);
    Plant_Origin[2] + ElbowRadius(ND_PltWeir) + ConRadius(ND_PltWeir)
]
exitweirpipe_origin :=
    if sedlayout == 2
        origin ← [
            Plant_Origin[0] - ElbowRadius(ND_PltWeir) - SocketDepth(ND_PltWeir);
            Plant_Origin[1] - T_PlantWall - S_Elbow - ConRadius(ND_PltWeir);
            Plant_Origin[2] + ElbowRadius(ND_PltWeir) + ConRadius(ND_PltWeir)
        ]
    if sedlayout == 3
        origin ← [
            Plant_Origin[0] - L_Sed + W_InletChannel + T_ChannelWall + S_Elbow + ConRadius(ND_PltWeir);
            Plant_Origin[1] - T_PlantWall - S_Elbow - ConRadius(ND_PltWeir);
            Plant_Origin[2] + ElbowRadius(ND_PltWeir) + ConRadius(ND_PltWeir)
        ]
    return ← origin
inletweirpipe_length := H_Sed - H_InletChannel + HW_InletChannel - ElbowRadius(ND_PltWeir) - ConRadius(ND_PltWeir) = 1.11177 m
exitweirpipe_length := H_Sed - H_ExitChannel + H_PltWeir - ElbowRadius(ND_PltWeir) - ConRadius(ND_PltWeir)
connectingpipe_length := L_Sed
framewall_origin1 :=
    for i ∈ 0 .. (N_SedTanks - 1)
        framewall_origin1[0, i] ← [T_PlantWall; i*W_Sed + (i + 1)*T_PlantWall; H_SedBayDivider]
    return framewall_origin1
origin := [0; 0; 0]
framewall_origin2 :=
    for i ∈ 0 .. (N_SedTanks - 1)
        framewall_origin1[0, i] ← [T_PlantWall; (i + 1)*(W_Sed + T_PlantWall) - W_SedFrameWall; H_SedBayDivider]
    return framewall_origin1
Sedbottomslopes_origin := [Plant_Origin[0]; Plant_Origin[1]; Plant_Origin[2]]
Sedbottomslopes_dim := [
    Sedbottomslopes_origin[0] + W_SedBayActual;
    Sedbottomslopes_origin[1] + H_SedSludge + T_SedSludge;
    Sedbottomslopes_origin[2] + L_Sed
]
SedDrain_origin := [
    Sedbottomslopes_origin[0] + Sedbottomslopes_dim[0]/2 - W_SedSludge/2;
    Sedbottomslopes_origin[1];
    Sedbottomslopes_origin[2]
]
SedDrain_dim := [SedDrain_origin[0] + W_SedSludge; SedDrain_origin[1] + H_SedSludge; SedDrain_origin[2] + L_Sed]
SedDrainCover_origin := [
    Sedbottomslopes_origin[0] + Sedbottomslopes_dim[0]/2 - W_SedDrainCover/2;
    Sedbottomslopes_origin[1] + H_SedSludge;
    Sedbottomslopes_origin[2]
]
SedDrainCover_dim := [
    SedDrainCover_origin[0] + W_SedDrainCover;
    SedDrainCover_origin[1] + T_SedSludge;
    SedDrainCover_origin[2] + L_Sed
]
Sedbottomslopeslope_origin := [
    Sedbottomslopes_origin[0] + W_SedInletBottom;
    Sedbottomslopes_origin[1] + Sedbottomslopes_dim[1];
    Sedbottomslopes_origin[2]
]
SedInletChimney_origin := [Plant_Origin[0]; Plant_Origin[1]; Plant_Origin[2]]
SedInletChimney_dim := [
    SedInletChimney_origin[0] + W_InletChannel;
    SedInletChimney_origin[1] - D_SedChimneyPipe - 2*S_SedInletChannelMin;
    SedInletChimney_origin[2] + (H_Sed - H_InletChannel - T_ChannelWall - H_SedSludge - T_SedSludge)
]
SedInletChimney_origin[1] - W_SedInletBottom + T_SedManifoldEntrance = -0.313012 m
SedInletChimney_origin[1] - D_SedChimneyPipe - 2*S_SedInletChannelMin = -0.2124 m
SedInletChimneyOuter_dim := [
    SedInletChimney_origin[0] + (W_InletChannel + T_ChannelWall - T_SedManifoldEntrance) + T_SedManifoldEntrance;
    SedInletChimney_origin[1] - D_SedChimneyPipe - 2*S_SedInletChannelMin - 2*T_SedWeir;
    SedInletChimney_dim[2]
]
SedInletChimneyEntrance_origin := [
    SedInletChimney_origin[0] + T_SedManifoldEntrance;
    SedInletChimney_origin[1] - T_SedManifoldEntrance;
    SedInletChimney_dim[2]
]
SedInletChimneyEntrance_dim := [
    SedInletChimneyEntrance_origin[0] + W_SedManifoldEntrance;
    SedInletChimneyEntrance_origin[1] - L_SedManifoldEntrance;
    SedInletChimneyEntrance_origin[2] + T_ChannelWall
]
SedBayDivider_Origin := [Plant_Origin[0]; Plant_Origin[1] + W_Sed/2 - W_SedBayDivider/2; Plant_Origin[2]]
SedBayDivider_Dim := [
    SedBayDivider_Origin[0] - L_Sed;
    SedBayDivider_Origin[1] + W_SedBayDivider;
    SedBayDivider_Origin[2] + H_SedBayDivider
]
slope_origin := [0; 0; 0]
sedport_origin := [W_SedSlopePlate; T_SedSlopePlate/tan(AN_SedPlate); 0]
DrainCover_origin := [
    Plant_Origin[0];
    Plant_Origin[1] + Sedbottomslopes_dim[0]/2 - W_SedDrainCover/2;
    Plant_Origin[2] + H_SedSludge
] = [0; 0.363812; 0.0459318] m
Notch_origin := [
    W_SedBayActual/2 + W_SedSludgeFlat/2 + T_SedInletSlope/sin(AN_SedTopInlet);
    T_SedSludge + H_SedSludge
] = [0.531188; 0.105932] m
lamina_origin :=
    origin ← [
        Plant_Origin[0] - W_ExitChannel - T_ChannelWall - T_SedPlate/sin(AN_SedPlate);
        Plant_Origin[1];
        Plant_Origin[2] + H_SedBayDivider + 2*outerdiameter(ND_SedPlateFrame)
    ]
    return origin  # These are the assumed dimensions for the frame that supports the lamella, they should probably be defined somewhere else.
pipeframe_origin := [-W_ExitChannel - T_ChannelWall; H_SedBayDivider + outerdiameter(ND_SedPlateFrame)/2; 0 m]
SedLaunder_origin := [
    Plant_Origin[0] - L_Sed + W_InletChannel + T_ChannelWall;
    Plant_Origin[1] + W_Sed/(N_SedLaunders*N_SedBays*2);
    Plant_Origin[2] + HW_Sed - H_SedAbove + outerradius(ND_SedLaunder)
] = [-3.81555; 0.23; 1.3398] m
SedLaunderOrifice_origin := [SedLaunder_origin[0]; SedLaunder_origin[1]; SedLaunder_origin[2] + L_Sed - B_SedLaunderOrifices]
textbox_origin := [-2*L_Sed; W_SedBay]
sedweirexit_origin := [
    {
        -W_ExitChannel if Geom_ExitChannel == Perpindicular_Weir
        -T_PlantWall otherwise
    };
    H_Sed - H_ExitChannel;
    {
        T_PlantWall - T_SedWeir if Geom_ExitChannel == Perpindicular_Weir
        -w_minchannelHL(H_SedWeirExit, HW_ExitChannel, Q_Plant, L_Channel, Nu_Water, E_Concrete, 1, HL_SedWeirExit) - T_SedWeir otherwise
    }
]
sedweirinlet_origin := [
    {
        -L_Sed if Geom_InletChannel == Perpindicular_Weir
        -T_PlantWall otherwise
    };
    H_Sed - H_InletChannel;
    {
        T_PlantWall - T_SedWeir if Geom_InletChannel == Perpindicular_Weir
        -L_Sed + W_InletChannelEst otherwise
    }
]
FlocHopper_origin := [0; 0; 0]
FlocHopperBox_dim := [L_FlocHopper; T_FlocHopper; H_FlocHopper]
FlocHopperWedge_dim := [(L_FlocHopper - W_FlocHopper)/2; T_FlocHopper; FlocHopper_origin[2]]
# Sedtank Scripts
Sedtanktankscript :=
    viewtops ← viewtop1
    layer1 ← layer_new("tank", grey)
    tank1 ← Tank(Plant_Origin, [L_Sed; W_Sed; H_Sed], T_PlantWall)
    layerset ← layer_set("0")
    layerfreeze1 ← layer_freeze("tank")
    one ← stack(viewtops, layer1, tank1, layerset, layerfreeze1)
    return one
Sedtanksubtractchannelscript :=
    viewfront ← viewfront1
    box1 ← box([-L_Sed + T_ChannelWall; H_Sed - H_InletChannel; T_PlantWall + zc], [-L_Sed + T_ChannelWall + W_InletChannel; H_Sed; -L_Channel - zc])
    layerthaw ← layer_thaw("tank")
    subtract1 ← subtractD(Plant_Origin, [-L_Sed + T_ChannelWall + W_InletChannel; H_Sed; -L_Channel + T_PlantWall + zc])
    box2 ← box([-W_ExitChannel; H_Sed - H_ExitChannel; T_PlantWall + zc], [Plant_Origin[0]; H_Sed; -L_Channel - zc])
    subtract2 ← subtractD(Plant_Origin, [Plant_Origin[0]; H_Sed; -L_Channel - zc])
    viewtop ← viewtop1
    layerfreeze1 ← layer_freeze("tank")
    one ← stack(viewfront, box1, layerthaw, subtract1, box2, subtract2, viewtop, layerfreeze1)
    return one
Sedtankexitchannelscript :=
    layer2 ← layer_new("echannel", ltgrey)
    channel1 ← ChannelDrawing(echannel_origin, [W_Sed + 2*T_PlantWall; W_ExitChannel; H_ExitChannel], T_ChannelWall)
    rotate1 ← rotate(echannel_origin, 90)
    bigunion ← union_allA
    layerset ← layer_set("0")
    layerfreeze2 ← layer_freeze("echannel")
    one ← stack(layer2, channel1, rotate1, bigunion, layerset, layerfreeze2)
    return ← one
Sedtankexitweirscriptparallel :=
    viewright ← viewrightside1
    layerset ← layer_set("0")
    box1 ← box(Plant_Origin, sedweirexit_dim)
    move1 ← move_all(Plant_Origin, sedweirexit_origin)
    layernew1 ← layer_new("sedweirexit", ltgrey)
    layerfreeze ← layer_freeze("0")
    viewfront ← viewfront1
    box2 ← box(Plant_Origin, [W_ExitChannelMin + T_SedWeir; H_ExitChannel; sedweirexit_dim[2]])
    move2 ← move_all(Plant_Origin, [-W_ExitChannel; sedweirexit_origin[1]; T_PlantWall - T_SedWeir])
    layerthaw2 ← layer_thaw("0")
    union1 ← union_allA
    layerset ← layer_set("0")
    layerfreeze2 ← layer_freeze("sedweirexit")
    viewtop ← viewtop1
    one ← stack(viewright, layerset, box1, move1, layernew1, layerfreeze, viewfront, box2, move2, layerthaw2, union1, layerset, layerfreeze2, viewtop)
    return one
sedweirexit_origin = [-0.147426; 1.22076; 0.11] m
Sedtankexitweirscriptperpindicular :=
    layernew1 ← layer_new("sedweirexit", ltgrey)
    viewfront ← viewfront1
    box1 ← box(Plant_Origin, sedweirexit_dim)
    move1 ← move_all(Plant_Origin, sedweirexit_origin)
    layerset ← layer_set("0")
    layerfreeze2 ← layer_freeze("sedweirexit")
    viewtop ← viewtop1
    one ← stack(layernew1, viewfront, box1, move1, layerset, layerset, layerfreeze2, viewtop)
    return one
Sedtankexitweirscript :=
    Sedtankexitweirscriptperpindicular if Geom_ExitChannel == Perpindicular_Weir
    Sedtankexitweirscriptparallel otherwise
Sedtankinletweirscriptparallel :=
    viewright ← viewrightside1
    layerset ← layer_set("0")
    box1 ← box(Plant_Origin, sedweirinlet_dim)
    move1 ← move_all(Plant_Origin, sedweirinlet_origin)
    layernew1 ← layer_new("sedweirinlet", ltgrey)
    layerfreeze ← layer_freeze("0")
    viewfront ← viewfront1
    box2 ← box(Plant_Origin, [W_InletChannelEst + T_SedWeir; H_InletChannel; sedweirinlet_dim[2]])
    move2 ← move_all(Plant_Origin, [-L_Sed; sedweirinlet_origin[1]; T_PlantWall - T_SedWeir])
    viewtop ← viewtop1
    mirror1 ← mirror3d_all([-L_Sed + W_InletChannelEst; L_Channel/2 - T_ChannelWall; Plant_Origin[2]])
    layerthaw2 ← layer_thaw("0")
    union1 ← union_allA
    layerset ← layer_set("0")
    layerfreeze2 ← layer_freeze("sedweirinlet")
    viewtop ← viewtop1
    one ← stack(viewright, layerset, box1, move1, layernew1, layerfreeze, viewfront, box2, move2, viewtop, layerthaw2, union1, layerset, layerfreeze2, viewtop)
    return one
# pipe11_origin | pipe14_origin | pipe6_1ength | pipe7_length | pipe8_length | pipe13_length | pipe14_length
pipe5_1ength
Sedtankinletweirscriptperpindicular :=
    layernew1 ← layer_new("sedweirinlet", ltgrey)
    viewfront ← viewfront1
    box1 ← box(Plant_Origin, sedweirinlet_dim)
    move1 ← move_all(Plant_Origin, sedweirinlet_origin)
    layerset ← layer_set("0")
    layerfreeze2 ← layer_freeze("sedweirinlet")
    viewtop ← viewtop1
    one ← stack(layernew1, viewfront, box1, move1, layerset, layerset, layerfreeze2, viewtop)
    return one
sedweirinlet_origin = [-4.24907; 1.22076; 0.11] m
Sedtankinletweirscript :=
    Sedtankinletweirscriptperpindicular if Geom_InletChannel == Perpindicular_Weir
    Sedtankinletweirscriptparallel otherwise
# pipe12_origin | pipe13_origin | pipe1_length
Sedtankinletchannelscript :=
    layer2 ← layer_new("channel", ltgrey)
    channel1 ← ChannelDrawing(channel_origin, [W_Sed + 2*T_PlantWall; W_InletChannel; H_InletChannel], T_ChannelWall)
    rotate1 ← rotate(channel_origin, 90)
    box1 ← box(channelinletwall_origin, channelinletwall_origin + channelinletwall_dim)
    bigunion ← union_allA
    box2 ← box(channelinletbox1_origin, channelinletbox1_origin + channelinletbox1_dim)
    subtract2 ← subtractD(Plant_Origin, channelinletbox1_origin)
    box3 ← box(channelinletbox2_origin, channelinletbox2_origin + channelinletbox2_dim)
    subtract3 ← subtractD(Plant_Origin, channelinletbox2_origin)
    layerset ← layer_set("0")
    viewtops ← viewtop1
    layerfreeze2 ← layer_freeze("channel")
    one ← stack(layer2, channel1, rotate1, bigunion, layerset, viewtops, layerfreeze2) if sedlayout == 1
    one ← stack(layer2, channel1, rotate1, bigunion, layerset, layerfreeze2) if sedlayout == 2
    one ← stack(layer2, channel1, rotate1, bigunion, layerset, layerfreeze2) if sedlayout == 3
    one ← stack(layer2, channel1, rotate1, box1, bigunion, viewtops, box2, subtract2, box3, subtract3, layerset, viewtops, layerfreeze2) if sedlayout == 4
    return ← one
Sedbottomslopescript :=
    layer3 ← layer_new("bottomslopes", ltgrey)
    view ← viewtop1
    win1 ← [Sedbottomslopes_origin[0] - zc; Sedbottomslopes_origin[1] - zc; Sedbottomslopes_origin[2] - zc]
    win2 ← [Sedbottomslopes_dim[0] + zc; Sedbottomslopes_dim[1] + zc; Sedbottomslopes_dim[2] + zc]
    zoom1 ← zoom_win(win1, win2)
    pline1 ← pline([Sedbottomslopeslope_origin[0]; Sedbottomslopeslope_origin[1]], [Sedbottomslopeslope_origin[0] - W_SedInletBottom; Sedbottomslopeslope_origin[1]], [
        Sedbottomslopeslope_origin[0] - W_SedInletBottom;
        Sedbottomslopeslope_origin[1] + W_SedInletBottom*tan(AN_SedBottom)
    ])
    extrude1 ← extrude(Sedbottomslopeslope_origin, L_Sed)
    mirror3d1 ← mirror3dyz(Sedbottomslopeslope_origin, [
        Sedbottomslopeslope_origin[0] + W_SedDrainCover/2;
        Sedbottomslopeslope_origin[1];
        Sedbottomslopeslope_origin[2]
    ])
    box1 ← box(Sedbottomslopes_origin, Sedbottomslopes_dim)
    box2 ← box(SedDrain_origin, SedDrain_dim)
    box3 ← box(SedDrainCover_origin, SedDrainCover_dim)
    subtract1 ← subtractD(Sedbottomslopes_origin, SedDrain_origin)
    subtract2 ← subtractD(Sedbottomslopes_origin, SedDrainCover_origin)
    unionall ← union_allA
    rotate3d1 ← rotate_3d(origin, origin, "x", 90)
    rotate3d2 ← rotate_3d(origin, origin, "z", 270)
    move1 ← move_all(Sedbottomslopes_origin, [Sedbottomslopes_origin[0]; Sedbottomslopes_origin[1] + W_Sed; Sedbottomslopes_origin[2]])
    arraybay1 ← concat("-array", sp, "ALL", sp, sp, "r", sp, stringit_nounits(N_SedBays), sp, "1", sp, stringit(-W_SedBay - W_SedBayDivider/2))
    arraybay2 ← concat("-array", sp, "ALL", sp, sp, "r", sp, stringit_nounits(N_SedBays), sp, "1", sp, stringit(-((W_Sed - (N_SedBays - 1)*W_SedBayDivider)/N_SedBays + W_SedBayDivider)))
    layerfreeze3 ← layer_freeze("bottomslopes")
    layerset ← layer_set("0")
    one ← stack(layer3, zoom1, pline1, extrude1, mirror3d1, box1, box2, box3, subtract1, subtract2, unionall, rotate3d1, rotate3d2, move1, layerset, layerfreeze3) if N_SedBays == 1
    one ← stack(layer3, zoom1, pline1, extrude1, mirror3d1, box1, box2, box3, subtract1, subtract2, unionall, rotate3d1, rotate3d2, move1, arraybay2, layerset, layerfreeze3) if (N_SedBays > 1 and N_SedTanks ≥ 1)
    one ← stack(layer3, zoom1, pline1, extrude1, mirror3d1, box1, box2, box3, subtract1, subtract2, unionall, rotate3d1, rotate3d2, move1, arraybay1, layerset, layerfreeze3) otherwise
    return one
# pipe2_origin | pipe3_origin | pipe11_origin | pipe14_origin | pipe6_1ength | pipe7_length | pipe8_length | pipe13_length | pipe14_length
# pipe4_origin | pipe5_origin | pipe8_origin | pipe5_1ength
# pipe6_origin | pipe7_origin | pipe9_origin | pipe10_origin | pipe12_origin | pipe13_origin | pipe1_length
Sedbaydividerscript :=
    layer5 ← layer_new("sedbaydivider", grey)
    view ← viewtop1
    box1 ← box(SedBayDivider_Origin, SedBayDivider_Dim)
    move1 ← move_all([Plant_Origin[0]; SedBayDivider_Origin[1]; Plant_Origin[2]], [Plant_Origin[0]; (W_Sed - (N_SedBays - 1)*W_SedBayDivider)/N_SedBays; Plant_Origin[2]])
    arraybay1 ← concat("-array", sp, "ALL", sp, sp, "r", sp, stringit_nounits(N_SedBays - 1), sp, "1", sp, stringit((W_Sed - (N_SedBays - 1)*W_SedBayDivider)/N_SedBays + W_SedBayDivider))
    arraybay2 ← concat("-array", sp, "ALL", sp, sp, "r", sp, stringit_nounits(N_SedBays - 1), sp, "1", sp, stringit(-W_SedBay - W_SedBayDivider/2))
    layerset ← layer_set("0")
    layerfreeze5 ← layer_freeze("sedbaydivider")
    one ← stack(layer5, view, box1, layerset, layerfreeze5) if N_SedBays == 1
    one ← stack(layer5, view, box1, move1, arraybay1, layerset, layerfreeze5) if (N_SedBays > 1 and N_SedTanks ≥ 1)
    one ← stack(layer5, view, box1, arraybay2, layerset, layerfreeze5) otherwise
    return one
Sedinletchimneyscript :=
    inletchimneylayer ← layer_new("inletchimney", blue)
    viewtop ← viewtop1
    win1 ← [SedInletChimney_origin[0] - zc; SedInletChimney_origin[1] + zc]
    win2 ← [SedInletChimneyOuter_dim[0] + zc; SedInletChimneyOuter_dim[1] - zc]
    zoom1 ← zoom_win(win1, win2)
    box2 ← box(SedInletChimney_origin, SedInletChimneyOuter_dim)
    viewright ← viewrightside1
    pline1 ← pline([SedInletChimney_origin[1]; SedInletChimney_origin[2] + H_SedManifoldPort], [SedInletChimney_origin[1]; SedInletChimney_origin[2]], [SedInletChimney_origin[1] - W_SedManifoldPort; SedInletChimney_origin[2]])
    extrude1 ← extrude([SedInletChimney_origin[0]; SedInletChimney_origin[1]; SedInletChimney_dim[2] + H_SedManifoldPort], SedInletChimneyOuter_dim[0])
    subtract2 ← subtractD(SedInletChimneyOuter_dim, [SedInletChimney_dim[0]; SedInletChimney_origin[1]; SedInletChimney_origin[2]])
    cylinder1 ← cylinderC([W_InletChannelEst/2; (SedInletChimney_origin[1] + SedInletChimneyOuter_dim[1])/2], D_SedChimneyPipe/2, SedInletChimneyOuter_dim[2] + zc)
    subtract3 ← subtractD(SedInletChimneyOuter_dim, [
        W_InletChannelEst/2 + D_SedChimneyPipe/2;
        (SedInletChimney_origin[1] + SedInletChimneyOuter_dim[1])/2;
        Plant_Origin[2]
    ])
    layernewcoupling ← layer_new("chimneycoupling", green)
    layerfreezeinletchimney ← layer_freeze("inletchimney")
    coupling ← couplingIDpipe([
        W_InletChannelEst/2;
        (SedInletChimney_origin[1] + SedInletChimneyOuter_dim[1])/2;
        H_Sed - H_InletChannel - (H_SedSludge + T_SedSludge)
    ], D_SedChimneyPipe, T_ChannelWall - SocketDepth(D_SedChimneyPipe) + T_SedWeir, EN_PipeSpec)
    inletholeslayer ← layer_new("inletholes", blue)
    layerfreezecoupling ← layer_freeze("chimneycoupling")
    layersetinletholes ← layer_set("inletholes")
    cylinder2 ← cylinderC([W_InletChannelEst/2; (SedInletChimney_origin[1] + SedInletChimneyOuter_dim[1])/2], D_SedChimneyPipe/2, SedInletChimneyOuter_dim[2] + T_ChannelWall + zc)
    cylinder2 ← cylinderC([W_InletChannelEst/2; (SedInletChimney_origin[1] + SedInletChimneyOuter_dim[1])/2], NominalDiameter(D_SedChimneyPipe, EN_PipeSpec)/2, SedInletChimneyOuter_dim[2] + T_ChannelWall + zc)
    rotate3d1 ← rotate_3d(origin, origin, "x", 90)
    box1 ← box([Plant_Origin[0] + T_SedWeir; Plant_Origin[1] - T_SedWeir; Plant_Origin[2]], [
        SedInletChimney_origin[0] + (W_InletChannel + T_ChannelWall - T_SedManifoldEntrance) + T_SedManifoldEntrance - T_SedWeir;
        SedInletChimney_origin[1] + SedInletChimneyOuter_dim[1] + T_SedWeir;
        SedInletChimney_dim[2] - T_SedWeir
    ])
    layerthawinletchimney ← layer_thaw("inletchimney")
    layerfreezecoupling ← layer_freeze("chimneycoupling")
    viewtop ← viewtop1
    subtract1 ← subtractD(SedInletChimneyOuter_dim, [
        SedInletChimney_origin[0] + (W_InletChannel + T_ChannelWall - T_SedManifoldEntrance) + T_SedManifoldEntrance - T_SedWeir;
        SedInletChimney_origin[1] + SedInletChimneyOuter_dim[1] + T_SedWeir;
        SedInletChimney_dim[2] - T_SedWeir
    ])
    layerthawcoupling ← layer_thaw("chimneycoupling")
    mirror4 ← mirror3d_all([SedInletChimney_dim[0]; -W_SedBayActual/2; SedInletChimney_dim[2]])
    move2 ← move_all(SedInletChimney_dim, [
        SedInletChimney_dim[0] - L_Sed;
        SedInletChimney_dim[1] + W_Sed;
        SedInletChimney_dim[2] + H_SedSludge + T_SedSludge
    ])
    layerchimneystops ← layer_new("chimney stops", grey)
    chimneystop ← chimneystop([
        W_InletChannelEst/2;
        (SedInletChimney_origin[1] + SedInletChimneyOuter_dim[1])/2;
        H_Sed - H_InletChannel - T_ChannelWall
    ], D_SedChimneyPipe, HW_InletChannel, 1 in, EN_PipeSpec)
    layerfreezechimneystops ← layer_freeze("chimney stops")
    arraybay3 ← concat("-array", sp, "ALL", sp, sp, "r", sp, stringit_nounits(N_SedBays), sp, "1", sp, stringit(-W_SedBay - W_SedBayDivider/2))
    arraybay4 ← concat("-array", sp, "ALL", sp, sp, "r", sp, stringit_nounits(N_SedBays), sp, "1", sp, stringit(-((W_Sed - (N_SedBays - 1)*W_SedBayDivider)/N_SedBays + W_SedBayDivider)))
    layerset ← layer_set("0")
    layerthawchannel ← layer_thaw("channel")
    layerthawchimneystops ← layer_thaw("chimney stops")
    layerfreezeinletholes ← layer_freeze("inletholes")
    layerfreezechimneycoupling ← layer_freeze("chimneycoupling")
    layerfreezechannel ← layer_freeze("channel")
    layerthawinletholes ← layer_thaw("inletholes")
    subtract4 ← subtractC([-L_Sed - T_PlantWall; Plant_Origin[1]; Plant_Origin[2]], [-L_Sed - T_PlantWall + 2*zc; W_Sed + T_PlantWall - 2*zc; Plant_Origin[2]], [-L_Sed + W_InletChannel; -T_PlantWall; Plant_Origin[2]])
    one ← stack(inletchimneylayer, viewtop, zoom1, box2, viewright, pline1, extrude1, viewtop, subtract2, cylinder1, subtract3, layernewcoupling, layerfreezeinletchimney, coupling, inletholeslayer, layersetinletholes, cylinder2, layerthawinletchimney, box1, layerfreezecoupling, viewtop, subtract1, layerthawcoupling, layerchimneystops, layerfreezeinletholes, layerfreezechimneycoupling, layerfreezeinletchimney, chimneystop, layerfreezechimneystops, layerthawinletchimney, layerthawcoupling, layerthawinletholes, mirror4, move2, viewtop, layerset, layerthawchannel, viewtop, layerfreezechimneycoupling, layerfreezechimneystops, subtract4, layerfreezeinletholes, layerfreezechannel, layerfreezeinletchimney) if N_SedBays == 1
    one ← stack(inletchimneylayer, viewtop, zoom1, box2, viewright, pline1, extrude1, viewtop, subtract2, cylinder1, subtract3, layernewcoupling, layerfreezeinletchimney, coupling, inletholeslayer, layersetinletholes, cylinder2, layerthawinletchimney, box1, layerfreezecoupling, viewtop, subtract1, layerthawcoupling, layerchimneystops, layerfreezeinletholes, layerfreezechimneycoupling, layerfreezeinletchimney, chimneystop, layerfreezechimneystops, layerthawinletchimney, layerthawcoupling, layerthawinletholes, mirror4, move2, arraybay4, layerset, layerthawchannel, viewtop, layerfreezechimneycoupling, layerfreezechimneystops, subtract4, layerfreezeinletholes, layerfreezechannel, layerfreezeinletchimney) if (N_SedBays > 1 and N_SedTanks ≥ 1)
    one ← stack(inletchimneylayer, viewtop, zoom1, box2, viewright, pline1, extrude1, viewtop, subtract2, cylinder1, subtract3, layernewcoupling, layerfreezeinletchimney, coupling, inletholeslayer, layersetinletholes, cylinder2, layerthawinletchimney, box1, layerfreezecoupling, viewtop, subtract1, layerthawcoupling, mirror4, layerchimneystops, layerfreezeinletholes, layerfreezeinletchimney, chimneystop, layerchimneystops, layerfreezeinletholes, chimneystop, layerfreezechimneystops, layerthawinletchimney, layerthawcoupling, move2, layerset, arraybay3, layerthawchannel, viewtop, layerfreezechimneycoupling, subtract4, layerfreezeinletholes, layerfreezechannel, layerfreezeinletchimney) otherwise
    return one
D_SedChimneyPipe = 0.1524 m
D_SedChimneyPipe = 0.1524 m
channelportscript :=
    layer1 ← layer_new("channelports", ltgrey)
    layerthaw1 ← layer_thaw("channel")
    viewright ← viewrightside1
    viewtop ← viewtop1
    box1 ← box(SedInletChimney_origin, [W_SedManifoldEntrance; L_SedManifoldEntrance; T_ChannelWall])
    move1 ← move_all(SedInletChimney_origin, [-L_Sed; 0; H_Sed - H_InletChannel - T_PlantWall])
    bayarray4 ← arraybay4 ← concat("-array", sp, "ALL", sp, sp, "r", sp, stringit_nounits(N_SedBays), sp, "1", sp, stringit(-((W_Sed - (N_SedBays - 1)*W_SedBayDivider)/N_SedBays + W_SedBayDivider)))
    bayarray3 ← concat("-array", sp, "ALL", sp, sp, "r", sp, stringit_nounits(N_SedBays), sp, "1", sp, stringit(-W_SedBay - W_SedBayDivider/2))
    unionports ← union_allA
    subtract1 ← subtractD([Plant_Origin[0] - L_Sed; Plant_Origin[1] + W_Sed; Plant_Origin[2] + H_Sed], [
        SedInletChimney_origin[0] - L_Sed + T_SedManifoldEntrance;
        SedInletChimney_origin[1] + W_Sed - T_SedManifoldEntrance;
        SedInletChimney_origin[2] + H_Sed - H_InletChannel
    ])
    layerset ← layer_set("0")
    layerfreeze1 ← layer_freeze("channel")
    layerfreeze2 ← layer_freeze("channelports")
    one ← stack(layer1, viewtop, box1, unionports, layerthaw1, subtract1, layerset, layerfreeze1, layerfreeze2) if N_SedBays == 1
    one ← stack(layer1, viewtop, box1, bayarray4, unionports, layerthaw1, subtract1, layerset, layerfreeze1, layerfreeze2) if (N_SedBays > 1 and N_SedTanks ≥ 1)
    one ← stack(layer1, viewtop, box1, bayarray3, unionports, layerthaw1, subtract1, layerset, layerfreeze1, layerfreeze2) otherwise
    return one
channelportscriptOLD :=
    layer1 ← layer_new("channelports", ltgrey)
    layerthaw1 ← layer_thaw("channel")
    viewright ← viewrightside1
    viewtop ← viewtop1
    box1 ← box([
        SedInletChimney_origin[0] - L_Sed + T_SedManifoldEntrance;
        SedInletChimney_origin[1] + W_Sed - T_SedManifoldEntrance;
        SedInletChimney_origin[2] + H_Sed - H_InletChannel
    ], [
        (SedInletChimney_origin[0] - L_Sed + T_SedManifoldEntrance) + W_SedManifoldEntrance;
        (SedInletChimney_origin[1] + W_Sed - T_SedManifoldEntrance) - L_SedManifoldEntrance;
        (SedInletChimney_origin[2] + H_Sed - H_InletChannel) - T_ChannelWall
    ])
    copy1 ← copyF([
        SedInletChimney_origin[0] - L_Sed + T_SedManifoldEntrance;
        SedInletChimney_origin[1] + W_Sed - T_SedManifoldEntrance;
        SedInletChimney_origin[2] + H_Sed - H_InletChannel
    ], [
        SedInletChimney_origin[0] - L_Sed + T_SedManifoldEntrance;
        SedInletChimney_origin[1] + W_Sed - T_SedManifoldEntrance;
        SedInletChimney_origin[2] + H_Sed - H_InletChannel
    ], [0; -L_SedManifoldEntrance - 4*T_SedManifoldEntrance - W_SedDrainCover; 0])
    bayarray4 ← arraybay4 ← concat("-array", sp, "ALL", sp, sp, "r", sp, stringit_nounits(N_SedBays), sp, "1", sp, stringit(-((W_Sed - (N_SedBays - 1)*W_SedBayDivider)/N_SedBays + W_SedBayDivider)))
    bayarray3 ← concat("-array", sp, "ALL", sp, sp, "r", sp, stringit_nounits(N_SedBays), sp, "1", sp, stringit(-W_SedBay - W_SedBayDivider/2))
    unionports ← union_allA
    subtract1 ← subtractD([Plant_Origin[0] - L_Sed; Plant_Origin[1] + W_Sed; Plant_Origin[2] + H_Sed], [
        SedInletChimney_origin[0] - L_Sed + T_SedManifoldEntrance;
        SedInletChimney_origin[1] + W_Sed - T_SedManifoldEntrance;
        SedInletChimney_origin[2] + H_Sed - H_InletChannel
    ])
    layerset ← layer_set("0")
    layerfreeze1 ← layer_freeze("channel")
    layerfreeze2 ← layer_freeze("channelports")
    one ← stack(layer1, viewtop, box1, copy1, unionports, layerthaw1, subtract1, layerset, layerfreeze1, layerfreeze2) if N_SedBays == 1
    one ← stack(layer1, viewtop, box1, copy1, bayarray4, unionports, layerthaw1, subtract1, layerset, layerfreeze1, layerfreeze2) if (N_SedBays > 1 and N_SedTanks ≥ 1)
    one ← stack(layer1, viewtop, box1, copy1, bayarray3, unionports, layerthaw1, subtract1, layerset, layerfreeze1, layerfreeze2) otherwise
    return one
slope_dim = [0.3; 0.800718; 0.04] m
W_SedInlet = 0.400359 m
sedport_dim = [0.260899; 0.0682439; 0.04] m
arrayB(origin, 1, N_SedPorts, W_SedSlopePlate) = "-array 0,0,0  R 1 12 0.3"
block2 := block("SedSlopesTot", slope_origin, slope_origin) = ["-block SedSlopesTot"; "0,0,0 all "; "-insert SedSlopesTot"; "0,0,0 "; " "]
sedslopeplate :=
    viewtop1 ← viewtop1
    layernew1 ← layer_new("slopes", ltpurple)
    layerset1 ← layer_set("slopes")
    box1 ← box(origin, slope_dim)
    box2 ← box(sedport_origin, sedport_dim)
    subtract1 ← subtractD(origin, sedport_origin)
    viewfront1 ← viewfront1
    array ← arrayB(origin, 1, N_SedPorts, W_SedSlopePlate)
    block ← block("SedSloeps", slope_origin, slope_origin)
    viewside ← viewrightside1
    rotate ← rotate_3d(origin, origin, "z", 60)
    mirror1 ← mirror3dyz(slope_origin, slope_origin - (W_SedSludgeFlat/2 + T_SedSlopePlate*sin(60 deg)))
    viewtop2 ← viewtop1
    move1 ← move(slope_origin, slope_origin, [W_SedSlopePlate/2; slope_origin[1]; slope_origin[2]])
    viewtop2 ← viewtop1
    explode1 ← explode([slope_origin[0]; -W_SedSlopePlate/2; slope_origin[2]])
    layerset2 ← layer_set("0")
    viewleftside1 ← viewleftside
    rectangle1 ← rectangle([slope_origin[0], slope_origin[0] + W_Sed; slope_origin[1], slope_origin[1] + H_Sed])
    viewtop2 ← viewtop1
    move2 ← move(slope_origin, slope_origin, [W_SedSlopePlate/2; slope_origin[1]; slope_origin[2]])
    slice1 ← slice_both([slope_origin[0]; -W_SedSlopePlate/2; slope_origin[2]], [W_SedSlopePlate/2; slope_origin[1]; slope_origin[2]], [W_Sed; slope_origin[1]; slope_origin[2]])
    layerfreeze1 ← layer_freeze("slopes")
    erase1 ← erase_all
    layerthaw1 ← layer_thaw("slopes")
    layerset1 ← layer_set("slopes")
    move3 ← move([slope_origin[0]; -W_SedSlopePlate/2; slope_origin[2]], slope_origin, [W_SedSlopePlate*N_SedPorts; slope_origin[1]; slope_origin[2]])
    move4 ← move_all(Plant_Origin, [
        -L_Sed + W_InletChannel;
        W_SedBayActual/2 + W_SedSludgeFlat/2 + T_SedInletSlope*sin(AN_SedTopInlet);
        H_SedSludge + T_SedSludge - T_SedInletSlope*cos(AN_SedTopInlet)
    ])
    arraybay4 ← concat("-array", sp, "ALL", sp, sp, "r", sp, stringit_nounits(N_SedBays), sp, "1", sp, stringit(W_SedBay + W_SedBayDivider/2))
    arraybay5 ← concat("-array", sp, "ALL", sp, sp, "r", sp, stringit_nounits(N_SedBays), sp, "1", sp, stringit((W_Sed - (N_SedBays - 1)*W_SedBayDivider)/N_SedBays + W_SedBayDivider))
    layerset2 ← layer_set("0")
    layerfreeze1 ← layer_freeze("slopes")
    one ← stack(viewtop1, layernew1, layerset1, box1, box2, viewtop1, subtract1, viewfront1, array, block, viewside, rotate, mirror1, viewtop2, move1, viewtop2, explode1, layerset2, viewleftside1, rectangle1, viewtop2, move2, slice1, layerfreeze1, erase1, layerthaw1, layerset1, move3, block2, move4, layerset2, layerfreeze1) if N_SedBays == 1
    one ← stack(viewtop1, layernew1, layerset1, box1, box2, viewtop1, subtract1, viewfront1, array, block, viewside, rotate, mirror1, viewtop2, move1, viewtop2, explode1, layerset2, viewleftside1, rectangle1, viewtop2, move2, slice1, layerfreeze1, erase1, layerthaw1, layerset1, move3, block2, move4, arraybay5, layerset2, layerfreeze1) if (N_SedBays > 1 and N_SedTanks ≥ 1)
    one ← stack(viewtop1, layernew1, layerset1, box1, box2, viewtop1, subtract1, viewfront1, array, block, viewside, rotate, mirror1, viewtop2, move1, viewtop2, explode1, layerset2, viewleftside1, rectangle1, viewtop2, move2, slice1, layerfreeze1, erase1, layerthaw1, layerset1, move3, block2, move4, arraybay4, layerset2, layerfreeze1) otherwise
    return one
Orificescript :=
    viewtops ← viewtop1
    layer1 ← layer_new("draincover", red)
    cylinder1 ← cylinderC([
        DrainCover_origin[0] + (-L_Sed) + B_SedSludgeOrifices;
        DrainCover_origin[1] + W_SedDrainCover/2;
        DrainCover_origin[2]
    ], D_SedSludgeOrifice/2, T_SedSludge)
    viewtops2 ← viewtop1
    cylinders ← array_all(1, N_SedSludgeOrifices, B_SedSludgeOrifices)
    union1 ← union_allA
    one ← stack(viewtops, layer1, cylinder1, cylinders, union1)
    return one
Draincoverscript :=
    viewtops ← viewtop1
    layerset2 ← layer_set("draincover")
    box1 ← box(DrainCover_origin, [
        DrainCover_origin[0] - L_Sed;
        DrainCover_origin[1] + W_SedDrainCover;
        DrainCover_origin[2] + T_SedSludge
    ])
    holes ← subtractD(DrainCover_origin, [
        DrainCover_origin[0] + (-L_Sed) + B_SedSludgeOrifices - D_SedSludgeOrifice/2;
        DrainCover_origin[1] + W_SedDrainCover/2;
        DrainCover_origin[2]
    ])
    layerset ← layer_set("0")
    layerfreeze ← layer_freeze("draincover")
    one ← stack(viewtops, layerset2, box1, viewtops, holes, layerset, layerfreeze)
    return one
Notchscript :=
    view1 ← viewrightside1
    layerthaw3 ← layer_thaw("draincover")
    layerset3 ← layer_set("draincover")
    notch1 ← pline(Notch_origin, [
        Notch_origin[0] - (T_SedInletSlope*cos(AN_SedTopInlet))/tan(AN_SedTopInlet);
        Notch_origin[1] - T_SedInletSlope*cos(AN_SedTopInlet)
    ], [Notch_origin[0] - T_SedInletSlope/sin(AN_SedTopInlet); Notch_origin[1]])
    notchl1 ← extrude([
        Notch_origin[0] - (T_SedInletSlope*cos(AN_SedTopInlet))/tan(AN_SedTopInlet);
        Notch_origin[1] - T_SedInletSlope*cos(AN_SedTopInlet)
    ], -L_Sed)
    mirrornotch ← mirror3dyz([Notch_origin[0] - T_SedInletSlope/sin(AN_SedTopInlet); Notch_origin[1]; Plant_Origin[0]], [W_SedBayActual/2; Notch_origin[1]; Plant_Origin[0]])
    layerset4 ← layer_set("0")
    hole1 ← subtractD([DrainCover_origin[1]; DrainCover_origin[2]], [
        Notch_origin[0] - (T_SedInletSlope*cos(AN_SedTopInlet))/tan(AN_SedTopInlet);
        Notch_origin[1] - T_SedInletSlope*cos(AN_SedTopInlet)
    ])
    hole2 ← subtractD([DrainCover_origin[1]; DrainCover_origin[2]], [W_SedBayActual/2 - W_SedSludgeFlat/2 - T_SedInletSlope/2; Notch_origin[1]])
    viewtop ← viewtop1
    arraybay5 ← concat("-array", sp, "ALL", sp, sp, "r", sp, stringit_nounits(N_SedBays), sp, "1", sp, stringit(W_SedBay + W_SedBayDivider/2))
    arraybay6 ← concat("-array", sp, "ALL", sp, sp, "r", sp, stringit_nounits(N_SedBays), sp, "1", sp, stringit((W_Sed - (N_SedBays - 1)*W_SedBayDivider)/N_SedBays + W_SedBayDivider))
    layerset5 ← layer_set("0")
    layerfreeze1 ← layer_freeze("draincover")
    one ← stack(layerthaw3, view1, layerset3, notch1, notchl1, mirrornotch, hole1, hole2, viewtop, layerset5, layerfreeze1) if N_SedBays == 1
    one ← stack(layerthaw3, view1, layerset3, notch1, notchl1, mirrornotch, hole1, hole2, viewtop, arraybay6, layerset5, layerfreeze1) if (N_SedBays > 1 and N_SedTanks ≥ 1)
    one ← stack(layerthaw3, view1, layerset3, notch1, notchl1, mirrornotch, hole1, hole2, viewtop, arraybay5, layerset5, layerfreeze1) otherwise
    return one
Sedtanklaminascript :=
    layer7 ← layer_new("lamina", purple)
    lamina1 ←
        lamina(lamina_origin, Amp_SedPlate, W_Sed, L_SedPlate, T_SedPlate, Per_SedPlate, AN_SedPlate, N_SedPlates, N_SedPlateCol, -B_SedPlateHorizontal, Y_SedPlate) if Baffle_complex == 1
        laminaplain1(lamina_origin, W_Sed, L_SedPlate, T_SedPlate, AN_SedPlate, N_SedPlates, N_SedPlateCol, -B_SedPlateHorizontal) otherwise
    array2 ← array_all(N_SedTanks, 1, W_Sed)
    block1 ← block("laminablock", lamina_origin, lamina_origin)
    layerset1 ← layer_set("0")
    layerfreeze7 ← layer_freeze("lamina")
    one ← stack(layer7, lamina1, block1, layerset1, layerfreeze7)
    return one
FlocHopperScript :=
    layer1 ← layer_new("flochopper", green)
    viewtop ← viewtop1
    zoomin1 ← zoom_win([FlocHopper_origin[0]; FlocHopper_origin[1]], [50 m; 100 m])
    flochopper_box ← box(FlocHopper_origin, FlocHopperBox_dim)
    flochopper_wedge1 ← wedge(FlocHopper_origin, FlocHopperWedge_dim, H_FlocHopper)
    mirror_wedge ← mirrorD(FlocHopperWedge_dim, [FlocHopper_origin[0] + L_FlocHopper/2; FlocHopper_origin[1]], [FlocHopper_origin[0] + L_FlocHopper/2; T_FlocHopper])
    zoomin2 ← zoom_win([FlocHopper_origin[0]; FlocHopper_origin[1]], [2*FlocHopperBox_dim[0]; 2*FlocHopperBox_dim[1]])
    subtract_wedge1 ← subtractD([FlocHopperBox_dim[0]/2; FlocHopperBox_dim[1]; FlocHopperBox_dim[2]], [FlocHopperWedge_dim[0]; FlocHopperWedge_dim[1]/2; FlocHopper_origin[2]])
    subtract_wedge2 ← subtractD([FlocHopperBox_dim[0]/2; FlocHopperBox_dim[1]], [FlocHopperWedge_dim[0] + W_FlocHopper; FlocHopperWedge_dim[1]/2])
    rotate_flochopper1 ← rotate_3d(FlocHopperBox_dim, FlocHopper_origin, "z", 90)
    rotate_flochopper ← rotate_3d([FlocHopper_origin[0]; FlocHopper_origin[1]; H_FlocHopper], [FlocHopper_origin[0] + T_FlocHopper; FlocHopper_origin[1]; FlocHopper_origin[2]], "y", 90 - AN_FlocHopper)
    move_flochopper ← move_allD([
        -L_Sed + SedInletChimneyOuter_dim[0] + T_FlocHopper;
        W_SedBayActual*(N_SedBays - 1) + W_SedBayDivider*(N_SedBays - 1);
        SedDrainCover_dim[1]
    ])
    arraybay3 ← concat("-array", sp, "ALL", sp, sp, "r", sp, stringit_nounits(N_SedBays), sp, "1", sp, stringit(-W_SedBay - W_SedBayDivider/2))
    arraybay4 ← concat("-array", sp, "ALL", sp, sp, "r", sp, stringit_nounits(N_SedBays), sp, "1", sp, stringit(-((W_Sed - (N_SedBays - 1)*W_SedBayDivider)/N_SedBays + W_SedBayDivider)))
    layerset ← layer_set("0")
    layerfreeze ← layer_freeze("flochopper")
    one ← stack(layer1, viewtop, zoomin1, flochopper_box, flochopper_wedge1, mirror_wedge, zoomin2, subtract_wedge1, subtract_wedge2, rotate_flochopper1, rotate_flochopper, move_flochopper, layerset, layerfreeze) if N_SedBays == 1
    one ← stack(layer1, viewtop, zoomin1, flochopper_box, flochopper_wedge1, mirror_wedge, zoomin2, subtract_wedge1, subtract_wedge2, rotate_flochopper1, rotate_flochopper, move_flochopper, arraybay4, layerset, layerfreeze) if N_SedBays > 1 and N_SedTanks ≥ 1
    one ← stack(layer1, viewtop, zoomin1, flochopper_box, flochopper_wedge1, mirror_wedge, zoomin2, subtract_wedge1, subtract_wedge2, rotate_flochopper1, rotate_flochopper, move_flochopper, arraybay3, layerset, layerfreeze) otherwise
    return one
move_allD([
    -L_Sed + SedInletChimneyOuter_dim[0] + T_FlocHopper;
    W_SedBayActual*(N_SedBays - 1) + W_SedBayDivider*(N_SedBays - 1);
    SedDrainCover_dim[1]
]) = "_move all  d -3.77555,0,0.10593"
Pipeframescript :=
    layer1 ← layer_new("pipeframe", yellow)
    view1 ← viewfront1
    cylinder1 ← cylinderC([pipeframe_origin[0] - B_SedPlateFramePipes; pipeframe_origin[1]; pipeframe_origin[2]], outerradius(ND_SedPlateFrame), -W_Sed)
    view2 ← viewtop1
    array1 ← array_all(1, floor(L_SedActiveMax/B_SedPlateFramePipes), -B_SedPlateFramePipes)
    view3 ← viewrightside1
    cylinder2 ← cylinderC([B_SedPlateFramePipes; pipeframe_origin[1] + 2*outerradius(ND_SedPlateFrame); pipeframe_origin[0]], outerradius(ND_SedPlateFrame), -(L_Sed - W_InletChannel - W_ExitChannel - 2*T_ChannelWall))
    numlength ← floor(W_Sed/B_SedPlateFramePipes) - 1
    arraybay7 ← arrayB([
        B_SedPlateFramePipes - outerradius(ND_SedPlateFrame);
        pipeframe_origin[1] + 2*outerradius(ND_SedPlateFrame);
        pipeframe_origin[0]
    ], 1, numlength, B_SedPlateFramePipes)
    union1 ← union_allA
    layerset1 ← layer_set("0")
    layerfreeze1 ← layer_freeze("pipeframe")
    one ← stack(layer1, view1, cylinder1, view2, array1, view3, cylinder2, arraybay7, union1, layerset1, layerfreeze1)
    one ← stack(layer1, view1, cylinder1, view2, array1, view3, cylinder2, arraybay7, union1, layerset1, layerfreeze1) if N_SedBays == 1
    one ← stack(layer1, view1, cylinder1, view2, array1, view3, cylinder2, arraybay7, union1, layerset1, layerfreeze1) otherwise
    return one
SedLaunderscript :=
    layernew1 ← layer_new("launder", blue)
    viewtop1 ← viewtop1
    win1 ← [
        SedLaunder_origin[0] - outerradius(ND_SedLaunder) - zc;
        SedLaunder_origin[1] - outerradius(ND_SedLaunder) - zc;
        SedLaunder_origin[2]
    ]
    win2 ← [
        (SedLaunder_origin[0] + outerradius(ND_SedLaunder)) + zc;
        SedLaunder_origin[1] + outerradius(ND_SedLaunder) + zc;
        SedLaunder_origin[2]
    ]
    zoom_win ← zoom_win(win1, win2)
    pipe1 ← Pipe(SedLaunder_origin, ND_SedLaunder, L_SedLaunder, EN_PipeSpec)
    cylinder3 ← cylinderD([
        SedLaunder_origin[0];
        SedLaunder_origin[1];
        SedLaunder_origin[2] + L_SedLaunder - B_SedLaunderOrifices
    ], D_SedLaunderOrifice/2, [
        SedLaunder_origin[0];
        SedLaunder_origin[1] + outerradius(ND_SedLaunder) + zc;
        SedLaunder_origin[2] + L_SedLaunder - B_SedLaunderOrifices
    ])
    viewrightside1 ← viewrightside1
    array1 ← arrayB([
        SedLaunder_origin[1] + outerradius(ND_SedLaunder) + zc;
        SedLaunder_origin[2] + L_SedLaunder - B_SedLaunderOrifices;
        SedLaunder_origin[0]
    ], floor(L_SedLaunder/B_SedLaunderOrifices), 1, -B_SedLaunderOrifices)
    subtract2 ← subtractH([SedLaunder_origin[0]; SedLaunder_origin[1] - outerradius(ND_SedLaunder)], [
        SedLaunder_origin[0] + D_SedLaunderOrifice + zc;
        SedLaunder_origin[1] + outerradius(ND_SedLaunder) + 2*zc
    ], [SedLaunder_origin[0] - D_SedLaunderOrifice - zc; SedLaunder_origin[1] - zc])
    cylinder4 ← cylinderD([
        SedLaunder_origin[0];
        SedLaunder_origin[1];
        SedLaunder_origin[2] + L_SedLaunder - B_SedLaunderOrifices
    ], D_SedLaunderOrifice/2, [
        SedLaunder_origin[0] + (outerradius(ND_SedLaunder)*cos(π/6)) + outerradius(ND_SedLaunder);
        SedLaunder_origin[1] + (outerradius(ND_SedLaunder)*sin(π/6)) + outerradius(ND_SedLaunder);
        SedLaunder_origin[2] + L_SedLaunder - B_SedLaunderOrifices
    ])
    array2 ← arrayB([
        SedLaunder_origin[1] + (outerradius(ND_SedLaunder)*sin(π/6)) + outerradius(ND_SedLaunder);
        SedLaunder_origin[2] + L_SedLaunder - B_SedLaunderOrifices
    ], floor(L_SedLaunder/B_SedLaunderOrifices), 1, -B_SedLaunderOrifices)
    holecylinder ← cylinderD(SedLaunder_origin, ND_SedLaunder, [SedLaunder_origin[0]; SedLaunder_origin[1]; SedLaunder_origin[2] + L_SedLaunder])
    subtract3 ← subtractH([SedLaunder_origin[0]; SedLaunder_origin[1] - outerradius(ND_SedLaunder)], [
        SedLaunder_origin[0] + (outerradius(ND_SedLaunder)*cos(π/3)) + 2*zc;
        SedLaunder_origin[0] + (outerradius(ND_SedLaunder)*sin(π/3)) + 2*zc
    ], [SedLaunder_origin[0]; SedLaunder_origin[1]])
    rotate1 ← rotate18 ← rotate_3d([
        SedLaunder_origin[0] + innerD(ND_SedLaunder, EN_PipeSpec)/2;
        SedLaunder_origin[1];
        SedLaunder_origin[2]
    ], SedLaunder_origin, "y", 90)
    rotate2 ← rotate_3d([
        SedLaunder_origin[0];
        SedLaunder_origin[1] + innerD(ND_SedLaunder, EN_PipeSpec)/2;
        SedLaunder_origin[2]
    ], SedLaunder_origin, "x", 120)
    viewtop2 ← viewtop1
    move1 ← move(SedLaunder_origin, SedLaunder_origin, [0; -SedLaunder_origin[1]/2; 0])
    bayarray1 ← array_all(N_SedLaunders*N_SedBays, 1, W_Sed/(N_SedLaunders*N_SedBays))
    arraywithinbay ← array_all(N_SedLaunders*N_SedBays, 1, (2*SedLaunder_origin)[1])
    arraybay4 ← concat("-array", sp, "ALL", sp, sp, "r", sp, stringit_nounits(N_SedBays), sp, "1", sp, stringit((W_Sed - (N_SedBays - 1)*W_SedBayDivider)/N_SedBays + W_SedBayDivider))
    arraybay2 ← concat("-array", sp, "ALL", sp, sp, "r", sp, stringit_nounits(N_SedBays), sp, "1", sp, stringit(W_SedBay + W_SedBayDivider/2))
    layerset1 ← layer_set("0")
    layerfreeze1 ← layer_freeze("launder")
    one ← stack(layernew1, viewtop1, zoom_win, pipe1, cylinder3, viewrightside1, array1, viewtop1, subtract2, viewtop1, zoom_win, cylinder4, viewrightside1, array2, viewtop1, subtract3, rotate1, rotate2, viewtop2, arraywithinbay, layerset1, layerfreeze1) if (N_SedTanks > 1 and N_SedBays > 1)
    one ← stack(layernew1, viewtop1, zoom_win, pipe1, cylinder3, viewrightside1, array1, viewtop1, subtract2, viewtop1, zoom_win, cylinder4, viewrightside1, array2, viewtop1, subtract3, rotate1, rotate2, viewtop2, arraywithinbay, layerset1, layerfreeze1) if N_SedBays == 1
    one ← stack(layernew1, viewtop1, zoom_win, pipe1, cylinder3, viewrightside1, array1, viewtop1, subtract2, viewtop1, zoom_win, cylinder4, viewrightside1, array2, viewtop1, subtract3, rotate1, rotate2, viewtop2, arraywithinbay, layerset1, layerfreeze1) otherwise
    return one
launderholes :=
    layernew1 ← layer_new("launderholes", blue)
    viewright ← viewrightside1
    cylinder1 ← cylinderD([SedLaunder_origin[1]; SedLaunder_origin[2]; -W_ExitChannel + zc], ND_SedLaunder/2, [SedLaunder_origin[1]; SedLaunder_origin[2]; -W_ExitChannel - T_ChannelWall - zc])
    arraywithinbay ← array_all(N_SedLaunders*N_SedBays, 1, (2*SedLaunder_origin)[1])
    arraybay2 ← concat("-array", sp, "ALL", sp, sp, "r", sp, stringit_nounits(N_SedBays), sp, "1", sp, stringit(W_SedBay + W_SedBayDivider/2))
    arraybay4 ← concat("-array", sp, "ALL", sp, sp, "r", sp, stringit_nounits(N_SedBays), sp, "1", sp, stringit((W_Sed - (N_SedBays - 1)*W_SedBayDivider)/N_SedBays + W_SedBayDivider))
    layerthaw1 ← layer_thaw("echannel")
    subtract1 ← subtractDall(echannel_origin)
    viewtop ← viewtop1
    layerset1 ← layer_set("0")
    one ← stack(layernew1, viewright, cylinder1, viewtop, arraywithinbay, layerthaw1, viewtop1, subtract1, layerset1)
Sedtankarrayscript :=
    layerthaw1 ← layer_thaw("tank")
    layerthaw2 ← layer_thaw("channel")
    layerthaw2e ← layer_thaw("echannel")
    layerthaw3 ← layer_thaw("bottomslopes")
    layerthaw4 ← layer_thaw("inletchimney")
    layerthaw5 ← layer_thaw("draincover")
    layerthaw6 ← layer_thaw("slopes")
    layerthaw7 ← layer_thaw("sedbaydivider")
    layerthaw8 ← layer_thaw("lamina")
    layerthaw9 ← layer_thaw("flochopper")
    layerthaw10 ← layer_thaw("pipeframe")
    layerthaw11 ← layer_thaw("launder")
    layerthaw12 ← layer_thaw("chimneycoupling")
    layerthaw13 ← layer_thaw("chimney stops")
    viewtop ← viewtop1
    arraytank1 ← concat("-array", sp, "ALL", sp, sp, "r", sp, stringit_nounits(N_SedTanks), sp, "1", sp, stringit(W_Sed + T_PlantWall))
    layerfreeze13 ← layer_freeze("tank")
    layerfreeze14 ← layer_freeze("channel")
    layerfreeze15 ← layer_freeze("echannel")
    layerfreeze16 ← layer_freeze("bottomslopes")
    layerfreeze17 ← layer_freeze("inletchimney")
    layerfreeze18 ← layer_freeze("draincover")
    layerfreeze19 ← layer_freeze("slopes")
    layerfreeze20 ← layer_freeze("sedbaydivider")
    layerfreeze21 ← layer_freeze("lamina")
    layerfreeze22 ← layer_freeze("flochopper")
    layerfreeze23 ← layer_freeze("pipeframe")
    layerfreeze24 ← layer_freeze("launder")
    layerfreeze25 ← layer_freeze("chimneycoupling")
    layerfreeze26 ← layer_freeze("chimney stops")
    bigunion ← union_allA
    layerset ← layer_set("0")
    one ← stack(layerthaw1, layerthaw2, layerthaw2e, layerthaw3, layerthaw4, layerthaw5, layerthaw6, layerthaw7, layerthaw8, layerthaw9, layerthaw10, layerthaw11, layerthaw12, layerthaw13)
    two ← stack(viewtop, arraytank1)
    three ← stack(layerfreeze13, layerfreeze14, layerfreeze15, layerfreeze16, layerfreeze17, layerfreeze18, layerfreeze19, layerfreeze20, layerfreeze21, layerfreeze22, layerfreeze23, layerfreeze24, layerfreeze25, layerfreeze26, bigunion, layerset, layerthaw2, bigunion, layerset, layerfreeze14, layerthaw2e, bigunion, layerset, layerfreeze15)
    return stack(one, two, three)
Sedtankopenchannelscript :=
    layerthawtank ← layer_thaw("tank")
    layerthawchannel ← layer_thaw("channel")
    viewtop1 ← viewtop1
    box1 ← box(channelbox_origin, [
        channelbox_origin[0] + channelbox_dim[0];
        channelbox_origin[1] + channelbox_dim[1];
        channelbox_origin[2] + channelbox_dim[2]
    ])
    subtract1 ← subtractD(Plant_Origin, channelbox_origin)
    box2 ← box(echannelbox_origin, [
        echannelbox_origin[0] + echannelbox_dim[0];
        echannelbox_origin[1] + echannelbox_dim[1];
        echannelbox_origin[2] + echannelbox_dim[2]
    ])
    subtract2 ← subtractD([Plant_Origin[0] + T_PlantWall; Plant_Origin[1]; Plant_Origin[2]], echannelbox_origin)
    layerset1 ← layer_set("channel")
    box3 ← box(channelclosebox_origin, channelclosebox_origin + channelclosebox_dim)
    bigunion ← union_allA
    layerset ← layer_set("0")
    layerfreezechannel ← layer_freeze("channel")
    layerfreezetank ← layer_freeze("tank")
    one ← stack(layerthawtank, viewtop1, bigunion, box1, subtract1, box2, subtract2, layerset, layerfreezetank)
    return one
sedechanneltankscript :=
    viewtope ← viewtop1
    layernewect ← layer_new("echanneltank", ltgrey)
    tankect ← Tank(echanneltank_origin, echanneltank_dim, T_PlantWall)
    boxect ← box(echannelbox_origin, echannelbox_origin + echannelbox_dim)
    subtractect ← subtractD(echanneltank_origin, echannelbox_origin)
    layerset ← layer_set("0")
    layerfreezeect ← layer_freeze("echanneltank")
    layernewewe ← layer_new("exitweirelbow", green)
    elbowewe ← elbow(sedtankexitweirelbow_origin, ND_PltWeir, EN_PipeSpec)
    rotateewe1 ← rotate_3d([
        sedtankexitweirelbow_origin[0] + ElbowRadius(ND_PltWeir);
        sedtankexitweirelbow_origin[1];
        sedtankexitweirelbow_origin[2] - outerradius(ND_PltWeir)
    ], sedtankexitweirelbow_origin, "y", 90)
    rotateewe2 ← rotate_3d([
        sedtankexitweirelbow_origin[0];
        sedtankexitweirelbow_origin[1] + ElbowRadius(ND_PltWeir) - outerradius(ND_PltWeir);
        sedtankexitweirelbow_origin[2]
    ], sedtankexitweirelbow_origin, "z", 270)
    elbowewe2 ← elbow(sedtankexitweirelbow2_origin, ND_PltWeir, EN_PipeSpec)
    rotateewe21 ← rotate_3d([
        sedtankexitweirelbow2_origin[0] + ElbowRadius(ND_PltWeir);
        sedtankexitweirelbow2_origin[1];
        sedtankexitweirelbow2_origin[2] - outerradius(ND_PltWeir)
    ], sedtankexitweirelbow2_origin, "y", 90)
    rotateewe22 ← rotate_3d([
        sedtankexitweirelbow2_origin[0];
        sedtankexitweirelbow2_origin[1] + ElbowRadius(ND_PltWeir) - outerradius(ND_PltWeir);
        sedtankexitweirelbow2_origin[2]
    ], sedtankexitweirelbow2_origin, "z", 90)
    layerfreezeewe ← layer_freeze("exitweirelbow")
    layernewewp ← layer_new("exitweir", blue)
    pipeewp ← Pipe(exitweirpipe_origin, ND_PltWeir, exitweirpipe_length, EN_PipeSpec)
    copyewp ← copyB(exitweirpipecopy1_point, exitweirpipecopy1_point, exitweirpipecopy2_point)
    layerfreezeewp ← layer_freeze("exitweir")
    layernewconnpipe ← layer_new("connecting pipe", blue)
    pipecon ← Pipe(sedtankconnectingpipe_origin, ND_PltWeir, connectingpipe_length, EN_PipeSpec)
    rotatepipecon ← rotate_3d([
        sedtankconnectingpipe_origin[0] + outerradius(ND_PltWeir);
        sedtankconnectingpipe_origin[1];
        sedtankconnectingpipe_origin[2] + connectingpipe_length
    ], sedtankconnectingpipe_origin, "y", 270)
    layerfreezepipecon ← layer_freeze("connecting pipe")
    one ← stack(viewtope, layernewect, tankect, boxect, subtractect, layerset, layerfreezeect, layernewewe, elbowewe, rotateewe1, rotateewe2, elbowewe2, rotateewe21, rotateewe22, layerset, layerfreezeewe, layernewewp, pipeewp, copyewp, layerset, layerfreezeewp, layernewconnpipe, pipecon, rotatepipecon, layerset, layerfreezepipecon)
    return one
    = [
        "_-view o t";
        "-layer m echanneltank";
        "c t 214,214,214";
        "echanneltank";
        "  ";
        "_-view o t _zoom w 0.16,-0.86386,1.22076 -0.59657,0.01,1.54134 _box 0,-0.70386,1.22076 -0.43657,-0.15,1.54134 _box 0.15,-0.85386,1.07076 -0.58657,0,1.54134 _subtract 0.15,-0.85386,1.07076  0,-0.70386,1.22076 ";
        "_box -0.14743,-0.15,1.22076 0,1.99,1.54134";
        "_subtract 0,-0.70386,1.22076  -0.14743,-0.15,1.22076 ";
        "-layer s 0";
        "  "
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    ]
sedichanneltankscript :=
    viewtopi ← viewtop1
    layernewict ← layer_new("ichanneltank", ltgrey)
    tankict ← Tank(ichanneltank_origin, ichanneltank_dim, T_PlantWall)
    boxict ← box(channelbox_origin, channelbox_origin + channelbox_dim)
    subtractict ← subtractD(ichanneltank_origin, channelbox_origin)
    layerset ← layer_set("0")
    layerfreezeict ← layer_freeze("ichanneltank")
    layernewiwt ← layer_new("inletweirtee", green)
    teeiwt ← Tee2(sedtankinletweirelbow_origin, ND_PltWeir, EN_PipeSpec)
    rotateiwt1 ← rotate_3d([
        sedtankinletweirelbow_origin[0] + outerradius(ND_PltWeir);
        sedtankinletweirelbow_origin[1];
        sedtankinletweirelbow_origin[2] - outerradius(ND_PltWeir)
    ], sedtankinletweirelbow_origin, "y", 90)
    rotateiwt2 ← rotate_3d([
        sedtankinletweirelbow_origin[0];
        sedtankinletweirelbow_origin[1] + ElbowRadius(ND_PltWeir) - outerradius(ND_PltWeir);
        sedtankinletweirelbow_origin[2]
    ], sedtankinletweirelbow_origin, "z", 90)
    layerfreezeiwt ← layer_freeze("inletweirtee")
    layernewiwp ← layer_new("inletweir", blue)
    pipeiwp ← Pipe(inletweirpipe_origin, ND_PltWeir, inletweirpipe_length, EN_PipeSpec)
    layerfreezeiwp ← layer_freeze("inletweir")
    one ← stack(viewtopi, layernewict, tankict, boxict, subtractict, layerset, layerfreezeict, layernewiwt, teeiwt, rotateiwt1, layerset, layerfreezeiwt, layernewiwp, pipeiwp, layerset, layerfreezeiwp)
    return one
framewall :=
    viewtop ← viewtop1
    layernew1 ← layer_new("framewall", dkgrey)
    layerset1 ← layer_set("framewall")
    for i ∈ 0 .. (N_SedTanks - 1)
        local ← stack(local, box(framewall_origin1[0, i], framewall_origin1[0, i] + framewall_dim), box(framewall_origin2[0, i], framewall_origin2[0, i] + framewall_dim))
        local
    block1 ← block("framewall", framewall_origin1[0, 0], [Plant_Origin[0]; Plant_Origin[1]; H_SedBayDivider])
    layerset2 ← layer_set("0")
    layerfreeze1 ← layer_freeze("framewall")
    local ← stack(layernew1, layerset1, local, block1, layerset2, layerfreeze1)
    return local
unionframeandtank :=
    layerset1 ← layer_set("0")
    layerthaw1 ← layer_thaw("tank")
    layerthaw2 ← layer_thaw("framewall")
    layerset2 ← layer_set("tank")
    block1 ← block("tank", Plant_Origin, Plant_Origin)
    layerfreeze1 ← layer_freeze("framewall")
    layerfreeze2 ← layer_freeze("tank")
    local ← stack(layerset1, layerthaw1, layerthaw2, block1, layerfreeze1, layerfreeze2)
    return local
text := textbox(H_Text, textbox_origin, textbox_origin + textbox_dim, Disclaimer) = ["textsize 0.05"; "-mtext -8.49813,0.92 -6.3736,1.84 Disclaimer: This drawing is a PRELIMINARY DESIGN and should be reviewed by a professional engineer."; ""]
AC_SedTank :=
    stack(Sedtanktankscript, Sedtanksubtractchannelscript, Sedtankexitchannelscript, Sedtankexitweirscript, Sedtankinletweirscript, Sedtankinletchannelscript, Sedbottomslopescript, Sedbaydividerscript, Sedinletchimneyscript, sedslopeplate, Orificescript, Draincoverscript, Notchscript, Sedtanklaminascript, Pipeframescript, SedLaunderscript, launderholes, Sedtankarrayscript, Sedtankopenchannelscript, sedichanneltankscript, sedechanneltankscript, text) if (N_SedBays > 1 and N_SedTanks > 1)
    stack(Sedtanktankscript, Sedtanksubtractchannelscript, Sedtankexitchannelscript, Sedtankexitweirscript, Sedtankinletweirscript, Sedtankinletchannelscript, Sedbottomslopescript, Sedinletchimneyscript, sedslopeplate, Orificescript, Draincoverscript, Notchscript, Sedtanklaminascript, Pipeframescript, SedLaunderscript, launderholes, Sedtankarrayscript, Sedtankopenchannelscript, sedichanneltankscript, sedechanneltankscript, text) if (N_SedBays ≤ 1 and N_SedTanks > 1)
    stack(Sedtanktankscript, Sedtanksubtractchannelscript, Sedtankexitchannelscript, Sedtankexitweirscript, Sedtankinletweirscript, Sedtankinletchannelscript, Sedbottomslopescript, Sedinletchimneyscript, sedslopeplate, Orificescript, Draincoverscript, Notchscript, Sedtanklaminascript, Pipeframescript, SedLaunderscript, launderholes, Sedtankopenchannelscript, sedichanneltankscript, sedechanneltankscript, text) if (N_SedBays == 1 and N_SedTanks == 1)
    stack(Sedtanktankscript, Sedtanksubtractchannelscript, Sedtankexitchannelscript, Sedtankexitweirscript, Sedtankinletweirscript, Sedtankinletchannelscript, Sedbottomslopescript, Sedbaydividerscript, Sedinletchimneyscript, sedslopeplate, Orificescript, Draincoverscript, Notchscript, Sedtanklaminascript, Pipeframescript, SedLaunderscript, launderholes, Sedtankopenchannelscript, sedichanneltankscript, sedechanneltankscript, text) if (N_SedBays > 1 and N_SedTanks == 1)
# [component: inputs AC_SedTank]
