# [reference: basics.xmcd]
# [reference: pipe.xmcd]
Manifoldscript(p1, p2, p3, p4, p5, p6, p7, p8, R1, R2, R3, L, n1, n2, d1, win1, win2) :=
    viewtop ← viewtop
    zoom_win ← zoom_wina(win1, win2)
    pipe1 ← Pipe(p1, R1, R2, L)
    cylinder3 ← cylinderD(p2, R3, p3)
    viewrightside ← viewrightside
    array1 ← array(p4, n1, n2, -d1)
    mirror1 ← mirrorB(p6, p7, p7, p8)
    subtract2 ← subtractG(p5, p8, p7)
    one ← concat(viewtop, zoom_win, pipe1, sp, cylinder3)
    two ← concat(zoom_win, viewrightside, array1, viewtop, mirror1, subtract2)
    return stack(one, two)
Manifold(manifold_origin, manifold_outr, manifold_inr, rad_hole, tank_length, orifice_dist) := Manifoldscript([manifold_origin[0]; manifold_origin[1]; manifold_origin[2]], [manifold_origin[0]; manifold_origin[1]; manifold_origin[2] + tank_length - orifice_dist], [
    manifold_origin[0];
    manifold_origin[1] + manifold_outr + zc;
    manifold_origin[2] + tank_length - orifice_dist
], [
    manifold_origin[1] + manifold_outr + zc;
    manifold_origin[2] + tank_length - orifice_dist;
    manifold_origin[0]
], [manifold_origin[0]; manifold_origin[1] - manifold_outr], [(manifold_origin[0] + manifold_inr/2); (manifold_origin[1] + (manifold_inr/(2*tan(π/3))))], [manifold_origin[0]; manifold_origin[1]], [manifold_origin[0] + zc; manifold_origin[1] + (zc*tan(π/3))], manifold_outr, manifold_inr, rad_hole, tank_length, floor(tank_length/orifice_dist), 1, orifice_dist, [manifold_origin[0] - manifold_outr; manifold_origin[1] - manifold_outr; manifold_origin[2]], [
    manifold_origin[0] + manifold_outr + zc;
    manifold_origin[1] + manifold_outr + zc;
    manifold_origin[2]
])  # error: This value has units: Unitless, but must have units: Length.
p8
# p1 | p2 | p3 | p4 | p5
# p6 | p7
Drawing_Manifold := Manifold([1; 2; 3], 3/12, 2.75/12, .5/12, 15, 4/12)  # error: This variable is undefined.
# [component: inputs Drawing_Manifold]
