# [reference: inputs.xmcd]
# [reference: SedTankwithlamina.xmcd]
# [reference: floctankbaffles.xmcd]
# [reference: Sed.eff.xmcd]
# [reference: platform.xmcd]
Plantscript1(grey, ltgrey, dkgrey, blue, blue2, blue3, green, purple, ltpurple, tank_origin, tank_dim, tank_thick, channel_dim, channel_thick, waterlevel, manifold_depth, num_tanks, pipe_inr, manifold_inr, manifoldorifice_rad, manifoldorifice_dist, waste_inr, wasteorifice_rad, wasteorifice_dist, pipe9_length, offfloor_length, floc_dim, wall_dim) :=
    Sedtank ← Sedtank(grey, ltgrey, blue, blue2, blue3, green, purple, tank_origin, tank_dim, tank_thick, channel_dim, channel_thick, pipe9_length, sedpipe_inr, manifold_inr, waste_inr, manifoldorifice_rad, manifoldorifice_dist, wasteorifice_rad, manifoldorifice_dist, waterlevel, manifold_depth, num_tanks, slope_width, slope_height)
    Floctank ← Floctank(dkgrey, ltpurple, tank_origin, tank_dim, floc_dim, wall_dim, channel_dim, tank_thick, baffle_amp, baffle_width, baffle_length, baffle_thick, baffle_periods, baffle_slope, baffle_num, baffle_col, baffle_x, baffle_y)
    layerthaw1 ← layer_thaw("channel")
    layerthaw2 ← layer_thaw("floctank")
    union1 ← concat("_union", sp, "ALL", sp)
    layerfreeze1 ← layer_freeze("floctank")
    one ← stack(layerthaw1, layerthaw2, union1, layerfreeze1)
    return stack(Sedtank, Floctank, one)
Plant1(grey, ltgrey, dkgrey, blue, blue2, blue3, green, purple, ltpurple, tank_origin, tank_dim, tank_thick, channel_dim, channel_thick, waterlevel, manifold_depth, num_tanks, sedpipe_inr, manifold_inr, manifoldorifice_rad, manifoldorifice_dist, waste_inr, wasteorifice_rad, wasteorifice_dist, pipe9_length, offfloor_length, floc_dim, wall_dim) := Plantscript1(grey, ltgrey, dkgrey, blue, blue2, blue3, green, purple, ltpurple, tank_origin, tank_dim, tank_thick, channel_dim, channel_thick, waterlevel, manifold_depth, num_tanks, sedpipe_inr, manifold_inr, manifoldorifice_rad, manifoldorifice_dist, waste_inr, wasteorifice_rad, wasteorifice_dist, pipe9_length, offfloor_length, floc_dim, wall_dim)
Drawing_Plant1 := Plant1(grey, ltgrey, dkgrey, blue, blue2, blue3, green, tank_origin, tank_dim, tank_thick, channel_dim, channel_thick, waterlevel, manifold_depth, num_tanks, sedpipe_inr, manifold_inr, manifoldorifice_rad, manifoldorifice_dist, waste_inr, wasteorifice_rad, wasteorifice_dist, pipe9_length, offfloor_length, floc_dim, wall_dim)  # error: This value has units: Unitless, but must have units: Length.
# [component: inputs Drawing_Plant1]
