# [reference: inputs.xmcd]
# [reference: SedTank.xmcd]
# [reference: floctank.xmcd]
# [reference: Sed.eff.xmcd]
# [reference: platform.xmcd]
Plantscript1(grey, ltgrey, dkgrey, blue, blue2, blue3, green, tank_origin, tank_dim, tank_thick, channel_dim, channel_thick, waterlevel, manifold_depth, num_tanks, pipe_inr, pipe_outr, rad_curve, rad_con, manifold_inr, manifold_outr, rad_orifice, orifice_dist, waste_inr, waste_out, elbow_h, pipe9_length, offfloor_length, floc_dim, wall_dim) :=
    Sedtank ← Sedtank(grey, ltgrey, blue, blue2, blue3, green, tank_origin, tank_dim, tank_thick, channel_dim, channel_thick, pipe9_length, rad_curve, rad_con, pipe_inr, pipe_outr, manifold_inr, manifold_outr, waste_inr, waste_outr, rad_orifice, elbow_h, waterlevel, manifold_depth, num_tanks)
    Floctank ← Floctank(dkgrey, tank_origin, tank_dim, floc_dim, channel_dim, tank_thick)
    layerthaw1 ← layer_thaw("channel")
    layerthaw2 ← layer_thaw("floctank")
    union1 ← concat("_union", sp, "ALL", sp)
    layerfreeze1 ← layer_freeze("floctank")
    one ← stack(layerthaw1, layerthaw2, union1, layerfreeze1)
    return stack(Sedtank, Floctank, one)
Plant1(grey, ltgrey, dkgrey, blue, blue2, blue3, green, tank_origin, tank_dim, tank_thick, channel_dim, channel_thick, waterlevel, manifold_depth, num_tanks, pipe_inr, pipe_outr, rad_curve, rad_con, manifold_inr, manifold_outr, rad_orifice, orifice_dist, waste_inr, waste_outr, elbow_h, pipe9_length, offfloor_length, floc_dim, wall_dim) := Plantscript1(grey, ltgrey, dkgrey, blue, blue2, blue3, green, tank_origin, tank_dim, tank_thick, channel_dim, channel_thick, waterlevel, manifold_depth, num_tanks, pipe_inr, pipe_outr, rad_curve, rad_con, manifold_inr, manifold_outr, rad_orifice, orifice_dist, waste_inr, waste_outr, elbow_h, pipe9_length, offfloor_length, floc_dim, wall_dim)
Drawing_Plant1 := Plant1(grey, ltgrey, dkgrey, blue, blue2, blue3, green, tank_origin, tank_dim, tank_thick, channel_dim, channel_thick, waterlevel, manifold_depth, num_tanks, pipe_inr, pipe_outr, rad_curve, rad_con, manifold_inr, manifold_outr, rad_orifice, orifice_dist, waste_inr, waste_outr, elbow_h, pipe9_length, offfloor_length, floc_dim, wall_dim)
# [component: inputs Drawing_Plant1]
