# [reference: inputs.xmcd]
# [reference: SedTank.xmcd]
# [reference: floctank.xmcd]
# [reference: Sed.eff.xmcd]
# [reference: platform.xmcd]
Plantscript2(grey, tank_origin, tank_dim, tank_thick, channel_dim, channel_thick, effluent_inr, effluent_outr, sedeff_origin, lvltank_dim, lvltank_thick, lvltank_waterlvl, wall_disp, walkway_width, platform_thick, column_dim, grit_dim, r_drum, drum_disp) :=
    Sedeff ← Sed_eff(sedeff_origin, tank_dim[1] + tank_thick, lvltank_dim, walkway_width, tank_dim[1]/2 + 2*tank_thick + floc_dim[1] - 2*r_drum - 2*drum_disp - lvltank_dim[1] - 2*lvltank_thick, Δz, lvltank_thick, platform_thick, pipe_outr, pipe_inr, rad_curve, rad_con, effluent_outr, effluent_inr, lvltank_waterlvl, elbow_h, num_tanks, wall_disp)
    layerset1 ← layer_set("0")
    layerfreeze1 ← layer_freeze("lvlpipe")
    layerfreeze2 ← layer_freeze("lvlelbow")
    layerfreeze3 ← layer_freeze("lvltank")
    Platform ← Platform(grey, tank_origin, tank_dim, floc_dim, channel_dim, column_dim, lvltank_dim, tank_thick, channel_thick, lvltank_thick, platform_thick, walkway_width, num_tanks, r_drum, drum_disp)
    three ← stack(Sedeff, layerset1, layerfreeze1, layerfreeze2, layerfreeze3, Platform)
    return three
Plant2(grey, tank_origin, tank_dim, tank_thick, channel_dim, channel_thick, effluent_inr, effluent_outr, sedeff_origin, lvltank_dim, lvltank_thick, lvltank_waterlvl, wall_disp, walkway_width, platform_thick, column_dim, grit_dim, r_drum, drum_disp) := Plantscript2(grey, tank_origin, tank_dim, tank_thick, channel_dim, channel_thick, effluent_inr, effluent_outr, sedeff_origin, lvltank_dim, lvltank_thick, lvltank_waterlvl, wall_disp, walkway_width, platform_thick, column_dim, grit_dim, r_drum, drum_disp)
Drawing_Plant2 := Plant2(grey, tank_origin, tank_dim, tank_thick, channel_dim, channel_thick, effluent_inr, effluent_outr, sedeff_origin, lvltank_dim, lvltank_thick, lvltank_waterlvl, wall_disp, walkway_width, platform_thick, column_dim, grit_dim, r_drum, drum_disp)
# [component: inputs Drawing_Plant2]
