# [reference: inputs.xmcd]
# [reference: grit.xmcd]
# [reference: basics.2006.xmcd]
# [reference: stocka.xmcd]
# [reference: stockb.xmcd]
Plantscript3(grit_origin, grit_dim, walkway_width, Δy_grit, Δz_grit, grit_thick, platform_thick, pipe_outr, pipe_inr, rad_curve, rad_con, elbow_h, Tee_length, Tee_lengths, Cross_length, rad_orifice, gritriser_h, grit_holes, stockplat1_origin, stockplat_dim1, stockplat2_origin, stockplat_dim2) :=
    layerset ← layer_set("0")
    layerfreeze1 ← layer_freeze("platform")
    Grit ← Grit(grit_origin, grit_dim, walkway_width, Δy_grit, Δz_grit, grit_thick, platform_thick, pipe_outr, pipe_inr, rad_curve, rad_con, elbow_h, Tee_length, Tee_lengths, Cross_length, rad_orifice, gritriser_h, grit_holes)
    stock1 ← Stock1(grey, stockplat1_origin, stockplat_dim1, stockplatcol_dim, r_drum, h_drum, walkway_width)
    stock2 ← Stock(grey, stockplat2_origin, stockplat_dim2, stockplatcol_dim, r_drum, h_drum, walkway_width)
    layer1 ← layer_thaw("barrel")
    layer2 ← layer_thaw("barrel1")
    layer3 ← layer_thaw("channel")
    layer4 ← layer_thaw("elbow")
    layer5 ← layer_thaw("floctank")
    layer6 ← layer_thaw("grit-cross")
    layer7 ← layer_thaw("grit-elbow1")
    layer8 ← layer_thaw("grit-elbow2")
    layer9 ← layer_thaw("grit-pipe")
    layer10 ← layer_thaw("grit-riser")
    layer11 ← layer_thaw("grit-tank")
    layer12 ← layer_thaw("grit-tee1")
    layer13 ← layer_thaw("grit-tee2")
    layer14 ← layer_thaw("lvlelbow")
    layer15 ← layer_thaw("lvlpipe")
    layer16 ← layer_thaw("lvltank")
    layer17 ← layer_thaw("manifold")
    layer18 ← layer_thaw("pipe")
    layer19 ← layer_thaw("platform")
    layer20 ← layer_thaw("sludgepipe")
    layer21 ← layer_thaw("stplatform")
    layer22 ← layer_thaw("stplatform1")
    layer23 ← layer_thaw("tank")
    one ← stack(layerset, layerfreeze1, Grit, stock1, stock2)
    two ← stack(layer1, layer2, layer3, layer4, layer5, layer6, layer7, layer8, layer9, layer10, layer11, layer12, layer13, layer14, layer15, layer16, layer17, layer18, layer19, layer20, layer21, layer22, layer23, viewse)
    return stack(one, two)
Plant3(grit_origin, grit_dim, walkway_width, Δy_grit, Δz_grit, grit_thick, platform_thick, pipe_outr, pipe_inr, rad_curve, rad_con, elbow_h, Tee_length, Tee_lengths, Cross_length, rad_orifice, gritriser_h, grit_holes) := Plantscript3(grit_origin, grit_dim, walkway_width, Δy_grit, Δz_grit, grit_thick, platform_thick, pipe_outr, pipe_inr, rad_curve, rad_con, elbow_h, Tee_length, Tee_lengths, Cross_length, rad_orifice, gritriser_h, grit_holes, [
    tank_origin[0] - tank_dim[0] - tank_thick - walkway_width - grit_dim[0] - 2*grit_thick;
    tank_origin[1] + num_tanks*tank_dim[1] + (num_tanks + 1)*tank_thick + floc_dim[1] + walkway_width;
    tank_origin[2] + tank_dim[2] - channel_dim[2] - channel_thick + platform_thick + stockplatcol_dim[2]
], [
    4*r_drum + 3*drum_disp + lvltank_dim[0] + 2*lvltank_thick - grit_dim[0] - 2*grit_thick;
    2*r_drum + 2*drum_disp;
    stockplat_thick
], [
    tank_origin[0] - tank_dim[0] - tank_thick - walkway_width - lvltank_dim[0] - 2*lvltank_thick;
    tank_origin[1] + num_tanks*tank_dim[1] + (num_tanks + 1)*tank_thick + floc_dim[1] - grit_dim[1] - 2*grit_thick;
    tank_origin[2] + tank_dim[2] - channel_dim[2] - channel_thick + platform_thick + stockplatcol_dim[2]
], [4*r_drum + 3*drum_disp; 2*r_drum + 2*drum_disp; stockplat_thick])
Drawing_Plant3 := Plant3(grit_origin, grit_dim, walkway_width, Δy_grit, Δz_grit, grit_thick, platform_thick, pipe_outr, pipe_inr, rad_curve, rad_con, elbow_h, Tee_length, Tee_lengths, Cross_length, rad_orifice, gritriser_h, grit_holes)
# [component: inputs Drawing_Plant3]
