# [reference: inputs.xmcd]
# [reference: elbow.xmcd]
# [reference: pipe.xmcd]
# [reference: pipe.no_zoom.xmcd]
# [reference: tank.xmcd]
# [reference: basics.2006.xmcd]
offset(tank, n) := tank/(n + 1)
Sedeff_script1(p1, p2, p3, p4, p5, p6, p7, p8, p9, blue, green, yellow, origin, lvltank_dim, Δx, Δy, Δz, thick_tank, thick_platform, width_sed, R1, R2, R_elbow, R_con, R_main1, R_main2, H_main, H, n, disp) :=
    layer1 ← layer_new("lvlpipe", blue)
    zoom1 ← zoom_win([origin[0] - R1; origin[1] - R1; origin[2]], [origin[0] + R1; origin[1] + R1; origin[2]])
    Pipe1 ← Pipe_nz(origin, R1, R2, Δx + thick_tank + offset(lvltank_dim[0], n) - R_elbow)
    Rotate1 ← rotate_3d([origin[0] + R1; origin[1]; origin[2]], origin, "y", -90)
    zoom2 ← zoom_win([p1[0] - R1; p1[1] - R1; p1[2]], [p1[0] + R1; p1[1] + R1; p1[2]])
    Pipe2 ← Pipe_nz(p1, R1, R2, Δy - 2*R_elbow + thick_tank + disp)
    Rotate2 ← rotate_3d([p1[0] + R1; p1[1]; p1[2]], p1, "x", -90)
    zoom3 ← zoom_win([p2[0] - R1; p2[1] - R1; p2[2]], [p2[0] + R1; p2[1] + R1; p2[2]])
    Pipe3 ← Pipe_nz(p2, R1, R2, Δx + thick_tank + 2*offset(lvltank_dim[0], n) - R_elbow)
    Rotate3 ← rotate_3d([p2[0] + R1; p2[1]; p2[2]], p2, "y", -90)
    zoom4 ← zoom_win([p3[0] - R1; p3[1] - R1; p3[2]], [p3[0] + R1; p3[1] + R1; p3[2]])
    Pipe4 ← Pipe_nz(p3, R1, R2, Δy + width_sed - 2*R_elbow + thick_tank + disp)
    Rotate4 ← rotate_3d([p3[0] + R1; p3[1]; p3[2]], p3, "x", -90)
    zoom5 ← zoom_win([p4[0] - R1; p4[1] - R1; p4[2]], [p4[0] + R1; p4[1] + R1; p4[2]])
    Pipe5 ← Pipe_nz(p4, R1, R2, Δx + thick_tank + 3*offset(lvltank_dim[0], n) - R_elbow)
    Rotate5 ← rotate_3d([p4[0] + R1; p4[1]; p4[2]], p4, "y", -90)
    zoom6 ← zoom_win([p5[0] - R1; p5[1] - R1; p5[2]], [p5[0] + R1; p5[1] + R1; p5[2]])
    Pipe6 ← Pipe_nz(p5, R1, R2, Δy + 2*width_sed - 2*R_elbow + thick_tank + disp)
    Rotate6 ← rotate_3d([p5[0] + R1; p5[1]; p5[2]], p5, "x", -90)
    zoom7 ← zoom_win([p7[0] - R1; p7[1] - R1; p7[2]], [p7[0] + R1; p7[1] + R1; p7[2]])
    Pipe7 ← Pipe_nz(p7, R1, R2, Δz - R_elbow + thick_platform)
    Copy5 ← copyC([p7[0] + R1; p7[1]; p7[2]], p7, [-offset(lvltank_dim[0], n); 0; 0], [-2*offset(lvltank_dim[0], n); 0; 0])
    Pipe8 ← Pipe_nz(p9, R_main1, R_main2, H_main + thick_platform + Δz)
    zoom8 ← zoom_win([p9[0] - R1; p9[1] - R1; p9[2]], [p9[0] + R1; p9[1] + R1; p9[2]])
    layer2 ← layer_set("0")
    layer3 ← layer_freeze("lvlpipe")
    layer4 ← layer_new("lvlelbow", green)
    Elbow1 ← elbow(p6, R_elbow, R1, R2, R_con, H)
    Rotate7 ← rotate_3d([p6[0]; p6[1] + R_elbow; p6[2]], [p6[0]; p6[1] + R_elbow; p6[2]], "z", -180)
    Copy1 ← copyB(p1, p1, p3)
    Copy2 ← copyB(p1, p1, p5)
    Copy3 ← copyB(p1, p1, [p1[0]; p1[1] + (Δy - 2*R_elbow + thick_tank + disp); p1[2]])
    Rotate8 ← rotate_3d([p1[0]; p1[1] + (Δy - 2*R_elbow + thick_tank + disp); p1[2]], [p1[0]; p1[1] + (Δy - 2*R_elbow + thick_tank + disp); p1[2]], "x", 180)
    Rotate9 ← rotate_3d([p1[0]; p1[1] + (Δy - 2*R_elbow + thick_tank + disp); p1[2]], [p1[0]; p1[1] + (Δy - 2*R_elbow + thick_tank + disp); p1[2]], "y", -90)
    Copy4 ← copyC([p1[0]; p1[1] + (Δy - 2*R_elbow + thick_tank + disp); p1[2]], [p1[0]; p1[1] + (Δy - 2*R_elbow + thick_tank + disp); p1[2]], [-offset(lvltank_dim[0], n); 0; 0], [-2*offset(lvltank_dim[0], n); 0; 0])
    layer5 ← layer_set("0")
    layer6 ← layer_freeze("lvlelbow")
    layer7 ← layer_new("lvltank", grey)
    Tank ← Tank(p8, lvltank_dim, thick_tank)
    layer8 ← layer_thaw("lvlpipe")
    layer9 ← layer_thaw("lvlelbow")
    layer10 ← layer_set("lvlpipe")
    cylinder ← cylinderC(p9, R_main1, H_main + thick_platform + Δz)
    subtract ← subtractD(p8, [p9[0] + R_main1; p9[1]; p9[2]])
    one ← stack(layer1, zoom1, Pipe1, Rotate1, zoom2, Pipe2, Rotate2, zoom3, Pipe3, Rotate3, zoom4, Pipe4, Rotate4, zoom5, Pipe5, Rotate5, zoom6, Pipe6, Rotate6, zoom7, Pipe7, zoomA, Copy5, layer2, layer3, layer4)
    two ← stack(Elbow1, Rotate7, zoomA, Copy1, Copy2, Copy3, zoomA, Rotate8, Rotate9, zoomA, Copy4, layer5, layer6, layer7, Tank, layer8, layer9, layer10, cylinder, subtract, zoom8, Pipe8)
    three ← stack(one, two)
    return three
Sedeff_script2(p1, p2, p3, p4, p5, p6, p7, p8, p9, p10, p11, blue, green, yellow, origin, lvltank_dim, Δx, Δy, Δz, thick_tank, thick_platform, width_sed, R1, R2, R_elbow, R_con, R_main1, R_main2, H_main, H, n, disp) :=
    layer1 ← layer_new("lvlpipe", blue)
    Pipe1 ← Pipe(origin, R1, R2, Δx + thick_tank + offset(lvltank_dim[0], n) - R_elbow)
    Rotate1 ← rotate_3d([origin[0] + R1; origin[1]; origin[2]], origin, "y", -90)
    Pipe2 ← Pipe(p1, R1, R2, Δy - 2*R_elbow + thick_tank + disp)
    Rotate2 ← rotate_3d([p1[0] + R1; p1[1]; p1[2]], p1, "x", -90)
    Pipe3 ← Pipe(p2, R1, R2, Δx + thick_tank + 2*offset(lvltank_dim[0], n) - R_elbow)
    Rotate3 ← rotate_3d([p2[0] + R1; p2[1]; p2[2]], p2, "y", -90)
    Pipe4 ← Pipe(p3, R1, R2, Δy + width_sed - 2*R_elbow + thick_tank + disp)
    Rotate4 ← rotate_3d([p3[0] + R1; p3[1]; p3[2]], p3, "x", -90)
    Pipe5 ← Pipe(p4, R1, R2, Δx + thick_tank + 3*offset(lvltank_dim[0], n) - R_elbow)
    Rotate5 ← rotate_3d([p4[0] + R1; p4[1]; p4[2]], p4, "y", -90)
    Pipe6 ← Pipe(p5, R1, R2, Δy + 2*width_sed - 2*R_elbow + thick_tank + disp)
    Rotate6 ← rotate_3d([p5[0] + R1; p5[1]; p5[2]], p5, "x", -90)
    zoom2 ← zoom_win([p10[0] + R1 + 1; p10[1] - R1 - 1; p10[2]], [p11[0] - R1 - 1; p11[1] - R1 - 1; p11[2]])
    Pipe9 ← Pipe_nz(p10, R1, R2, Δx + thick_tank + 4*offset(lvltank_dim[0], n) - R_elbow)
    Rotate10 ← rotate_3d([p10[0] + R1; p10[1]; p10[2]], p10, "y", -90)
    Pipe10 ← Pipe_nz(p11, R1, R2, Δy + 3*width_sed - 2*R_elbow + thick_tank + disp)
    Rotate11 ← rotate_3d([p11[0] + R1; p11[1]; p11[2]], p11, "x", -90)
    Pipe7 ← Pipe_nz([p7[0]; p7[1]; p7[2]], R1, R2, Δz - R_elbow + thick_platform)
    zoom3 ← zoom_win(p8, [p8[0] + lvltank_dim[0]; p8[1] + lvltank_dim[1]; 0])
    Copy5 ← copyD([p7[0] + R1; p7[1]; p7[2]], [p7[0]; p7[1]; p7[2]], [-offset(lvltank_dim[0], n); 0; 0], [-2*offset(lvltank_dim[0], n); 0; 0], [-3*offset(lvltank_dim[0], n); 0; 0])
    Pipe8 ← Pipe_nz(p9, R_main1, R_main2, H_main + thick_platform + Δz)
    zoom1 ← zoom_win(p1, [
        origin[0] - Δx - 2*thick_tank - lvltank_dim[0];
        origin[1] + Δy + 2*thick_tank + lvltank_dim[1];
        origin[2]
    ])
    layer2 ← layer_set("0")
    layer3 ← layer_freeze("lvlpipe")
    layer4 ← layer_new("lvlelbow", green)
    Elbow1 ← elbow(p6, R_elbow, R1, R2, R_con, H)
    Rotate7 ← rotate_3d([p6[0]; p6[1] + R_elbow; p6[2]], [p6[0]; p6[1] + R_elbow; p6[2]], "z", -180)
    Copy1 ← copyB(p1, p1, p3)
    Copy2 ← copyB(p1, p1, p5)
    Copy6 ← copyB(p1, p1, p11)
    Copy3 ← copyB(p1, p1, [p1[0]; p1[1] + (Δy - 2*R_elbow + thick_tank + disp); p1[2]])
    Rotate8 ← rotate_3d([p1[0]; p1[1] + (Δy - 2*R_elbow + thick_tank + disp); p1[2]], [p1[0]; p1[1] + (Δy - 2*R_elbow + thick_tank + disp); p1[2]], "x", 180)
    Rotate9 ← rotate_3d([p1[0]; p1[1] + (Δy - 2*R_elbow + thick_tank + disp); p1[2]], [p1[0]; p1[1] + (Δy - 2*R_elbow + thick_tank + disp); p1[2]], "y", -90)
    Copy4 ← copyD([p1[0]; p1[1] + (Δy - 2*R_elbow + thick_tank + disp); p1[2]], [p1[0]; p1[1] + (Δy - 2*R_elbow + thick_tank + disp); p1[2]], [-offset(lvltank_dim[0], n); 0; 0], [-2*offset(lvltank_dim[0], n); 0; 0], [-3*offset(lvltank_dim[0], n); 0; 0])
    layer5 ← layer_set("0")
    layer6 ← layer_freeze("lvlelbow")
    layer7 ← layer_new("lvltank", grey)
    Tank ← Tank(p8, lvltank_dim, thick_tank)
    layer8 ← layer_thaw("lvlpipe")
    layer9 ← layer_thaw("lvlelbow")
    layer10 ← layer_set("lvlpipe")
    cylinder ← cylinderC(p9, R_main1, H_main + thick_platform + Δz)
    subtract ← subtractD(p8, [p9[0] + R_main1; p9[1]; p9[2]])
    one ← stack(layer1, Pipe1, Rotate1, Pipe2, Rotate2, Pipe3, Rotate3, Pipe4, Rotate4, Pipe5, Rotate5, Pipe6, Rotate6, zoom2, Pipe9, Rotate10, Pipe10, Rotate11, zoom3, Pipe7, zoomA, Copy5, layer2, layer3, layer4)
    two ← stack(Elbow1, Rotate7, zoomA, Copy1, Copy2, Copy6, Copy3, zoomA, Rotate8, Rotate9, zoomA, Copy4, layer5, layer6, layer7, Tank, layer8, layer9, layer10, cylinder, subtract, zoom1, Pipe8)
    three ← stack(one, two)
    return three
Sedeff_script3(p1, p2, p3, p4, p5, p6, p7, p8, p9, p10, p11, p12, blue, green, yellow, origin, lvltank_dim, Δx, Δy, Δz, thick_tank, thick_platform, width_sed, R1, R2, R_elbow, R_con, R_main1, R_main2, H_main, H, n, disp) :=
    layer1 ← layer_new("lvlpipe", blue)
    Pipe1 ← Pipe(origin, R1, R2, Δx + thick_tank + offset(lvltank_dim[0], n) - R_elbow)
    Rotate1 ← rotate_3d([origin[0] + R1; origin[1]; origin[2]], origin, "y", -90)
    Pipe2 ← Pipe(p1, R1, R2, Δy - 2*R_elbow + thick_tank + disp)
    Rotate2 ← rotate_3d([p1[0] + R1; p1[1]; p1[2]], p1, "x", -90)
    Pipe3 ← Pipe(p2, R1, R2, Δx + thick_tank + 2*offset(lvltank_dim[0], n) - R_elbow)
    Rotate3 ← rotate_3d([p2[0] + R1; p2[1]; p2[2]], p2, "y", -90)
    Pipe4 ← Pipe(p3, R1, R2, Δy + width_sed - 2*R_elbow + thick_tank + disp)
    Rotate4 ← rotate_3d([p3[0] + R1; p3[1]; p3[2]], p3, "x", -90)
    Pipe5 ← Pipe(p4, R1, R2, Δx + thick_tank + 3*offset(lvltank_dim[0], n) - R_elbow)
    Rotate5 ← rotate_3d([p4[0] + R1; p4[1]; p4[2]], p4, "y", -90)
    Pipe6 ← Pipe(p5, R1, R2, Δy + 2*width_sed - 2*R_elbow + thick_tank + disp)
    Rotate6 ← rotate_3d([p5[0] + R1; p5[1]; p5[2]], p5, "x", -90)
    zoom2 ← zoom_win([origin[0] + R1 + 1; origin[1] - 5*width_sed - R1 - 1; origin[2]], [p12[0] - R1 - 1; p12[1] + width_sed + R1 + 1; p12[2]])
    Pipe9 ← Pipe_nz(p10, R1, R2, Δx + thick_tank + 4*offset(lvltank_dim[0], n) - R_elbow)
    Rotate10 ← rotate_3d([p10[0] + R1; p10[1]; p10[2]], p10, "y", -90)
    Pipe10 ← Pipe_nz(p11, R1, R2, Δy + 3*width_sed - 2*R_elbow + thick_tank + disp)
    Rotate11 ← rotate_3d([p11[0] + R1; p11[1]; p11[2]], p11, "x", -90)
    Pipe11 ← Pipe_nz([origin[0]; origin[1] - 4*width_sed; origin[2]], R1, R2, Δx + thick_tank + 5*offset(lvltank_dim[0], n) - R_elbow)
    Rotate12 ← rotate_3d([origin[0] + R1; origin[1] - 4*width_sed; origin[2]], [origin[0]; origin[1] - 4*width_sed; origin[2]], "y", -90)
    Pipe12 ← Pipe_nz(p12, R1, R2, Δy + 4*width_sed - 2*R_elbow + thick_tank + disp)
    Rotate13 ← rotate_3d([p12[0] + R1; p12[1]; p12[2]], p12, "x", -90)
    Pipe7 ← Pipe_nz([p7[0]; p7[1]; p7[2]], R1, R2, Δz - R_elbow + thick_platform)
    zoom3 ← zoom_win(p8, [p8[0] + lvltank_dim[0]; p8[1] + lvltank_dim[1]; 0])
    Copy5 ← copyE([p7[0] + R1; p7[1]; p7[2]], [p7[0]; p7[1]; p7[2]], [-offset(lvltank_dim[0], n); 0; 0], [-2*offset(lvltank_dim[0], n); 0; 0], [-3*offset(lvltank_dim[0], n); 0; 0], [-4*offset(lvltank_dim[0], n); 0; 0])
    Pipe8 ← Pipe_nz(p9, R_main1, R_main2, H_main + thick_platform + Δz)
    zoom1 ← zoom_win(p1, [
        origin[0] - Δx - 2*thick_tank - lvltank_dim[0];
        origin[1] + Δy + 2*thick_tank + lvltank_dim[1];
        origin[2]
    ])
    layer2 ← layer_set("0")
    layer3 ← layer_freeze("lvlpipe")
    layer4 ← layer_new("lvlelbow", green)
    Elbow1 ← elbow(p6, R_elbow, R1, R2, R_con, H)
    Rotate7 ← rotate_3d([p6[0]; p6[1] + R_elbow; p6[2]], [p6[0]; p6[1] + R_elbow; p6[2]], "z", -180)
    Copy1 ← copyB(p1, p1, p3)
    Copy2 ← copyB(p1, p1, p5)
    Copy6 ← copyB(p1, p1, p11)
    Copy7 ← copyB(p1, p1, p12)
    Copy3 ← copyB(p1, p1, [p1[0]; p1[1] + (Δy - 2*R_elbow + thick_tank + disp); p1[2]])
    Rotate8 ← rotate_3d([p1[0]; p1[1] + (Δy - 2*R_elbow + thick_tank + disp); p1[2]], [p1[0]; p1[1] + (Δy - 2*R_elbow + thick_tank + disp); p1[2]], "x", 180)
    Rotate9 ← rotate_3d([p1[0]; p1[1] + (Δy - 2*R_elbow + thick_tank + disp); p1[2]], [p1[0]; p1[1] + (Δy - 2*R_elbow + thick_tank + disp); p1[2]], "y", -90)
    Copy4 ← copyE([p1[0]; p1[1] + (Δy - 2*R_elbow + thick_tank + disp); p1[2]], [p1[0]; p1[1] + (Δy - 2*R_elbow + thick_tank + disp); p1[2]], [-offset(lvltank_dim[0], n); 0; 0], [-2*offset(lvltank_dim[0], n); 0; 0], [-3*offset(lvltank_dim[0], n); 0; 0], [-4*offset(lvltank_dim[0], n); 0; 0])
    layer5 ← layer_set("0")
    layer6 ← layer_freeze("lvlelbow")
    layer7 ← layer_new("lvltank", grey)
    Tank ← Tank(p8, lvltank_dim, thick_tank)
    layer8 ← layer_thaw("lvlpipe")
    layer9 ← layer_thaw("lvlelbow")
    layer10 ← layer_set("lvlpipe")
    cylinder ← cylinderC(p9, R_main1, H_main + thick_platform + Δz)
    subtract ← subtractD(p8, [p9[0] + R_main1; p9[1]; p9[2]])
    one ← stack(layer1, Pipe1, Rotate1, Pipe2, Rotate2, Pipe3, Rotate3, Pipe4, Rotate4, Pipe5, Rotate5, Pipe6, Rotate6, zoom2, Pipe9, Rotate10, Pipe10, Rotate11, Pipe11, Rotate12, Pipe12, Rotate13, zoom3, Pipe7, zoomA, Copy5)
    two ← stack(layer2, layer3, layer4, Elbow1, Rotate7, zoomA, Copy1, Copy2, Copy6, Copy7, Copy3, zoomA, Rotate8, Rotate9, zoomA, Copy4, layer5, layer6, layer7, Tank, layer8, layer9, layer10, cylinder, subtract, zoom1, Pipe8)
    three ← stack(one, two)
    return three
Sed_eff(origin, width_sed, lvltank_dim, Δx, Δy, Δz, lvltank_thick, thick_platform, R1, R2, rad_curve, R_con, R_main1, R_main2, H_main, H, n, disp) :=
    if n == 3
        ans ← Sedeff_script1([origin[0] - (Δx + lvltank_thick + offset(lvltank_dim[0], n)); origin[1] + rad_curve; origin[2]], [origin[0]; origin[1] - width_sed; origin[2]], [
            origin[0] - Δx - lvltank_thick - 2*offset(lvltank_dim[0], n);
            origin[1] - width_sed + rad_curve;
            origin[2]
        ], [origin[0]; origin[1] - 2*width_sed; origin[2]], [
            origin[0] - Δx - lvltank_thick - 3*offset(lvltank_dim[0], n);
            origin[1] - 2*width_sed + rad_curve;
            origin[2]
        ], [
            origin[0] - Δx - lvltank_thick - offset(lvltank_dim[0], n) + rad_curve;
            origin[1] - rad_curve;
            origin[2]
        ], [
            origin[0] - Δx - lvltank_thick - offset(lvltank_dim[0], n);
            origin[1] + Δy + lvltank_thick + disp;
            origin[2] + rad_curve
        ], [origin[0] - Δx - lvltank_thick; origin[1] + Δy + lvltank_thick; origin[2] + Δz + thick_platform], [
            origin[0] - Δx - lvltank_thick - lvltank_dim[0]/2;
            origin[1] + Δy + lvltank_thick + lvltank_dim[1] - disp;
            origin[2]
        ], [0; 255; 255], [0; 255; 0], [255; 255; 0], origin, lvltank_dim, Δx, Δy, Δz, lvltank_thick, thick_platform, width_sed, R1, R2, rad_curve, R_con, R_main1, R_main2, H_main, H, n, disp)
    if n == 4
        ans ← Sedeff_script2([origin[0] - (Δx + lvltank_thick + offset(lvltank_dim[0], n)); origin[1] + rad_curve; origin[2]], [origin[0]; origin[1] - width_sed; origin[2]], [
            origin[0] - Δx - lvltank_thick - 2*offset(lvltank_dim[0], n);
            origin[1] - width_sed + rad_curve;
            origin[2]
        ], [origin[0]; origin[1] - 2*width_sed; origin[2]], [
            origin[0] - Δx - lvltank_thick - 3*offset(lvltank_dim[0], n);
            origin[1] - 2*width_sed + rad_curve;
            origin[2]
        ], [
            origin[0] - Δx - lvltank_thick - offset(lvltank_dim[0], n) + rad_curve;
            origin[1] - rad_curve;
            origin[2]
        ], [
            origin[0] - Δx - lvltank_thick - offset(lvltank_dim[0], n);
            origin[1] + Δy + lvltank_thick + disp;
            origin[2] + rad_curve
        ], [origin[0] - Δx - lvltank_thick; origin[1] + Δy + lvltank_thick; origin[2] + Δz + thick_platform], [
            origin[0] - Δx - lvltank_thick - lvltank_dim[0]/2;
            origin[1] + Δy + lvltank_thick + lvltank_dim[1] - disp;
            origin[2]
        ], [origin[0]; origin[1] - 3*width_sed; origin[2]], [
            origin[0] - Δx - lvltank_thick - 4*offset(lvltank_dim[0], n);
            origin[1] - 3*width_sed + rad_curve;
            origin[2]
        ], [0; 255; 255], [0; 255; 0], [255; 255; 0], origin, lvltank_dim, Δx, Δy, Δz, lvltank_thick, thick_platform, width_sed, R1, R2, rad_curve, R_con, R_main1, R_main2, H_main, H, n, disp)
    if n == 5
        ans ← Sedeff_script3([origin[0] - (Δx + lvltank_thick + offset(lvltank_dim[0], n)); origin[1] + rad_curve; origin[2]], [origin[0]; origin[1] - width_sed; origin[2]], [
            origin[0] - Δx - lvltank_thick - 2*offset(lvltank_dim[0], n);
            origin[1] - width_sed + rad_curve;
            origin[2]
        ], [origin[0]; origin[1] - 2*width_sed; origin[2]], [
            origin[0] - Δx - lvltank_thick - 3*offset(lvltank_dim[0], n);
            origin[1] - 2*width_sed + rad_curve;
            origin[2]
        ], [
            origin[0] - Δx - lvltank_thick - offset(lvltank_dim[0], n) + rad_curve;
            origin[1] - rad_curve;
            origin[2]
        ], [
            origin[0] - Δx - lvltank_thick - offset(lvltank_dim[0], n);
            origin[1] + Δy + lvltank_thick + disp;
            origin[2] + rad_curve
        ], [origin[0] - Δx - lvltank_thick; origin[1] + Δy + lvltank_thick; origin[2] + Δz + thick_platform], [
            origin[0] - Δx - lvltank_thick - lvltank_dim[0]/2;
            origin[1] + Δy + lvltank_thick + lvltank_dim[1] - disp;
            origin[2]
        ], [origin[0]; origin[1] - 3*width_sed; origin[2]], [
            origin[0] - Δx - lvltank_thick - 4*offset(lvltank_dim[0], n);
            origin[1] - 3*width_sed + rad_curve;
            origin[2]
        ], [
            origin[0] - Δx - lvltank_thick - 5*offset(lvltank_dim[0], n);
            origin[1] - 4*width_sed + rad_curve;
            origin[2]
        ], [0; 255; 255], [0; 255; 0], [255; 255; 0], origin, lvltank_dim, Δx, Δy, Δz, lvltank_thick, thick_platform, width_sed, R1, R2, rad_curve, R_con, R_main1, R_main2, H_main, H, n, disp)
    return ans
Drawing_sedeff := Sed_eff(sedeff_origin, tank_dim[1] + tank_thick, lvltank_dim, walkway_width, tank_dim[1]/2 + tank_thick + floc_dim[1] - grit_dim[1] - lvltank_dim[1] - 2*lvltank_thick, Δz, lvltank_thick, platform_thick, pipe_outr, pipe_inr, rad_curve, rad_con, effluent_outr, effluent_inr, lvltank_waterlvl, elbow_h, num_tanks, wall_disp)
# [component: inputs Drawing_sedeff]
