# [reference: inputs.xmcd]
# [reference: elbow.xmcd]
# [reference: pipe.xmcd]
# [reference: pipe.no_zoom.xmcd]
# [reference: tank.xmcd]
# [reference: basics.xmcd]
offset(tank, n) := tank/(n + 1)
Sedeff_script1(pipe2_origin, pipe3_origin, pipe4_origin, pipe5_origin, pipe6_origin, elbow1_origin, pipe7_origin, tank_origin, main_origin, origin, lvltank_dim, Δx, Δy, Δz, thick_tank, thick_platform, width_sed, R1, R_main, H_main, n, disp) :=
    layer1 ← layer_new("lvlpipe", blue)
    Pipe1 ← Pipe(origin, R1, Δx + thick_tank + offset(lvltank_dim[0], n) - ElbowRadius(2*R1))
    Rotate1 ← rotate_3d([origin[0] + R1; origin[1]; origin[2]], origin, "y", -90)
    Pipe2 ← Pipe(pipe2_origin, R1, Δy - 2*ElbowRadius(2*R1) + thick_tank + disp)
    Rotate2 ← rotate_3d([pipe2_origin[0] + R1; pipe2_origin[1]; pipe2_origin[2]], pipe2_origin, "x", -90)
    Pipe3 ← Pipe(pipe3_origin, R1, Δx + thick_tank + 2*offset(lvltank_dim[0], n) - ElbowRadius(2*R1))
    Rotate3 ← rotate_3d([pipe3_origin[0] + R1; pipe3_origin[1]; pipe3_origin[2]], pipe3_origin, "y", -90)
    Pipe4 ← Pipe(pipe4_origin, R1, Δy + width_sed - 2*ElbowRadius(2*R1) + thick_tank + disp)
    Rotate4 ← rotate_3d([pipe4_origin[0] + R1; pipe4_origin[1]; pipe4_origin[2]], pipe4_origin, "x", -90)
    Pipe5 ← Pipe(pipe5_origin, R1, Δx + thick_tank + 3*offset(lvltank_dim[0], n) - ElbowRadius(2*R1))
    Rotate5 ← rotate_3d([pipe5_origin[0] + R1; pipe5_origin[1]; pipe5_origin[2]], pipe5_origin, "y", -90)
    Pipe6 ← Pipe(pipe6_origin, R1, Δy + 2*width_sed - 2*ElbowRadius(2*R1) + thick_tank + disp)
    Rotate6 ← rotate_3d([pipe6_origin[0] + R1; pipe6_origin[1]; pipe6_origin[2]], pipe6_origin, "x", -90)
    Pipe7 ← Pipe(pipe7_origin, R1, Δz - ElbowRadius(2*R1) + thick_platform)
    zoom_win1 ← zoom_win(tank_origin, [tank_origin[0] - lvltank_dim[0]; tank_origin[1] + lvltank_dim[1]; tank_origin[2]])
    Copy5 ← copyC([pipe7_origin[0] + R1; pipe7_origin[1]; pipe7_origin[2]], pipe7_origin, [-offset(lvltank_dim[0], n); 0; 0], [-2*offset(lvltank_dim[0], n); 0; 0])
    Pipe8 ← Pipe(main_origin, R_main, H_main + thick_platform + Δz)
    layer2 ← layer_set("0")
    layer3 ← layer_freeze("lvlpipe")
    layer4 ← layer_new("lvlelbow", green)
    Elbow1 ← elbow(elbow1_origin, R1)
    Rotate7 ← rotate_3d([elbow1_origin[0]; elbow1_origin[1] + ElbowRadius(2*R1); elbow1_origin[2]], [elbow1_origin[0]; elbow1_origin[1] + ElbowRadius(2*R1); elbow1_origin[2]], "z", -180)
    zoom_win2 ← zoom_win([origin[0] - Δx; origin[1] + 2*ElbowRadius(2*R1); origin[2]], [pipe6_origin[0] - 2*ElbowRadius(2*R1); pipe6_origin[1] - 2*ElbowRadius(2*R1); pipe6_origin[2]])
    Copy1 ← copyB(pipe2_origin, pipe2_origin, pipe4_origin)
    Copy2 ← copyB(pipe2_origin, pipe2_origin, pipe6_origin)
    Copy3 ← copyB(pipe2_origin, pipe2_origin, [pipe2_origin[0]; pipe2_origin[1] + (Δy - 2*ElbowRadius(2*R1) + thick_tank + disp); pipe2_origin[2]])
    Rotate8 ← rotate_3d([pipe2_origin[0]; pipe2_origin[1] + (Δy - 2*ElbowRadius(2*R1) + thick_tank + disp); pipe2_origin[2]], [pipe2_origin[0]; pipe2_origin[1] + (Δy - 2*ElbowRadius(2*R1) + thick_tank + disp); pipe2_origin[2]], "x", 180)
    Rotate9 ← rotate_3d([pipe2_origin[0]; pipe2_origin[1] + (Δy - 2*ElbowRadius(2*R1) + thick_tank + disp); pipe2_origin[2]], [pipe2_origin[0]; pipe2_origin[1] + (Δy - 2*ElbowRadius(2*R1) + thick_tank + disp); pipe2_origin[2]], "y", -90)
    Copy4 ← copyC([pipe2_origin[0]; pipe2_origin[1] + (Δy - 2*ElbowRadius(2*R1) + thick_tank + disp); pipe2_origin[2]], [pipe2_origin[0]; pipe2_origin[1] + (Δy - 2*ElbowRadius(2*R1) + thick_tank + disp); pipe2_origin[2]], [-offset(lvltank_dim[0], n); 0; 0], [-2*offset(lvltank_dim[0], n); 0; 0])
    layer5 ← layer_set("0")
    layer6 ← layer_freeze("lvlelbow")
    layer7 ← layer_new("lvltank", grey)
    Tank ← Tank(tank_origin, lvltank_dim, thick_tank)
    layer8 ← layer_thaw("lvlpipe")
    layer9 ← layer_thaw("lvlelbow")
    layer10 ← layer_set("lvlpipe")
    cylinder ← cylinderC(main_origin, R_main, H_main + thick_platform + Δz)
    subtract ← subtractD(tank_origin, [main_origin[0] + R_main; main_origin[1]; main_origin[2]])
    one ← stack(layer1, Pipe1, Rotate1, Pipe2, Rotate2, Pipe3, Rotate3, Pipe4, Rotate4, Pipe5, Rotate5, Pipe6, Rotate6, Pipe7, zoom_win1, Copy5, layer2, layer3, layer4)
    two ← stack(Elbow1, Rotate7, zoom_win2, Copy1, Copy2, Copy3, zoom_win1, Rotate8, Rotate9, Copy4, layer5, layer6, layer7, Tank, layer8, layer9, layer10, cylinder, subtract, Pipe8)
    three ← stack(one, two)
    return three
Sedeff_script2(pipe2_origin, pipe3_origin, pipe4_origin, pipe5_origin, pipe6_origin, elbow1_origin, pipe7_origin, tank_origin, main_origin, p10, p11, origin, lvltank_dim, Δx, Δy, Δz, thick_tank, thick_platform, width_sed, R1, R_main, H_main, n, disp) :=
    layer1 ← layer_new("lvlpipe", blue)
    Pipe1 ← Pipe(origin, R1, Δx + thick_tank + offset(lvltank_dim[0], n) - ElbowRadius(2*R1))
    Rotate1 ← rotate_3d([origin[0] + R1; origin[1]; origin[2]], origin, "y", -90)
    Pipe2 ← Pipe(pipe2_origin, R1, Δy - 2*ElbowRadius(2*R1) + thick_tank + disp)
    Rotate2 ← rotate_3d([pipe2_origin[0] + R1; pipe2_origin[1]; pipe2_origin[2]], pipe2_origin, "x", -90)
    Pipe3 ← Pipe(pipe3_origin, R1, Δx + thick_tank + 2*offset(lvltank_dim[0], n) - ElbowRadius(2*R1))
    Rotate3 ← rotate_3d([pipe3_origin[0] + R1; pipe3_origin[1]; pipe3_origin[2]], pipe3_origin, "y", -90)
    Pipe4 ← Pipe(pipe4_origin, R1, Δy + width_sed - 2*ElbowRadius(2*R1) + thick_tank + disp)
    Rotate4 ← rotate_3d([pipe4_origin[0] + R1; pipe4_origin[1]; pipe4_origin[2]], pipe4_origin, "x", -90)
    Pipe5 ← Pipe(pipe5_origin, R1, Δx + thick_tank + 3*offset(lvltank_dim[0], n) - ElbowRadius(2*R1))
    Rotate5 ← rotate_3d([pipe5_origin[0] + R1; pipe5_origin[1]; pipe5_origin[2]], pipe5_origin, "y", -90)
    Pipe6 ← Pipe(pipe6_origin, R1, Δy + 2*width_sed - 2*ElbowRadius(2*R1) + thick_tank + disp)
    Rotate6 ← rotate_3d([pipe6_origin[0] + R1; pipe6_origin[1]; pipe6_origin[2]], pipe6_origin, "x", -90)
    Pipe9 ← Pipe(p10, R1, Δx + thick_tank + 4*offset(lvltank_dim[0], n) - ElbowRadius(2*R1))
    Rotate10 ← rotate_3d([p10[0] + R1; p10[1]; p10[2]], p10, "y", -90)
    Pipe10 ← Pipe(p11, R1, Δy + 3*width_sed - 2*ElbowRadius(2*R1) + thick_tank + disp)
    Rotate11 ← rotate_3d([p11[0] + R1; p11[1]; p11[2]], p11, "x", -90)
    Pipe7 ← Pipe([pipe7_origin[0]; pipe7_origin[1]; pipe7_origin[2]], R1, Δz - ElbowRadius(2*R1) + thick_platform)
    zoom_win1 ← zoom_win(tank_origin, [tank_origin[0] - lvltank_dim[0]; tank_origin[1] + lvltank_dim[1]; tank_origin[2]])
    Copy5 ← copyD([pipe7_origin[0] + R1; pipe7_origin[1]; pipe7_origin[2]], [pipe7_origin[0]; pipe7_origin[1]; pipe7_origin[2]], [-offset(lvltank_dim[0], n); 0; 0], [-2*offset(lvltank_dim[0], n); 0; 0], [-3*offset(lvltank_dim[0], n); 0; 0])
    Pipe8 ← Pipe(main_origin, R_main, H_main + thick_platform + Δz)
    layer2 ← layer_set("0")
    layer3 ← layer_freeze("lvlpipe")
    layer4 ← layer_new("lvlelbow", green)
    Elbow1 ← elbow(elbow1_origin, R1)
    Rotate7 ← rotate_3d([elbow1_origin[0]; elbow1_origin[1] + ElbowRadius(2*R1); elbow1_origin[2]], [elbow1_origin[0]; elbow1_origin[1] + ElbowRadius(2*R1); elbow1_origin[2]], "z", -180)
    zoom_win2 ← zoom_win([origin[0] - Δx; origin[1] + 2*ElbowRadius(2*R1); origin[2]], [p11[0] - 2*ElbowRadius(2*R1); p11[1] - 2*ElbowRadius(2*R1); p11[2]])
    Copy1 ← copyB(pipe2_origin, pipe2_origin, pipe4_origin)
    Copy2 ← copyB(pipe2_origin, pipe2_origin, pipe6_origin)
    Copy6 ← copyB(pipe2_origin, pipe2_origin, p11)
    Copy3 ← copyB(pipe2_origin, pipe2_origin, [pipe2_origin[0]; pipe2_origin[1] + (Δy - 2*ElbowRadius(2*R1) + thick_tank + disp); pipe2_origin[2]])
    Rotate8 ← rotate_3d([pipe2_origin[0]; pipe2_origin[1] + (Δy - 2*ElbowRadius(2*R1) + thick_tank + disp); pipe2_origin[2]], [pipe2_origin[0]; pipe2_origin[1] + (Δy - 2*ElbowRadius(2*R1) + thick_tank + disp); pipe2_origin[2]], "x", 180)
    Rotate9 ← rotate_3d([pipe2_origin[0]; pipe2_origin[1] + (Δy - 2*ElbowRadius(2*R1) + thick_tank + disp); pipe2_origin[2]], [pipe2_origin[0]; pipe2_origin[1] + (Δy - 2*ElbowRadius(2*R1) + thick_tank + disp); pipe2_origin[2]], "y", -90)
    Copy4 ← copyD([pipe2_origin[0]; pipe2_origin[1] + (Δy - 2*ElbowRadius(2*R1) + thick_tank + disp); pipe2_origin[2]], [pipe2_origin[0]; pipe2_origin[1] + (Δy - 2*ElbowRadius(2*R1) + thick_tank + disp); pipe2_origin[2]], [-offset(lvltank_dim[0], n); 0; 0], [-2*offset(lvltank_dim[0], n); 0; 0], [-3*offset(lvltank_dim[0], n); 0; 0])
    layer5 ← layer_set("0")
    layer6 ← layer_freeze("lvlelbow")
    layer7 ← layer_new("lvltank", grey)
    Tank ← Tank(tank_origin, lvltank_dim, thick_tank)
    layer8 ← layer_thaw("lvlpipe")
    layer9 ← layer_thaw("lvlelbow")
    layer10 ← layer_set("lvlpipe")
    cylinder ← cylinderC(main_origin, R_main, H_main + thick_platform + Δz)
    subtract ← subtractD(tank_origin, [main_origin[0] + R_main; main_origin[1]; main_origin[2]])
    one ← stack(layer1, Pipe1, Rotate1, Pipe2, Rotate2, Pipe3, Rotate3, Pipe4, Rotate4, Pipe5, Rotate5, Pipe6, Rotate6, Pipe9, Rotate10, Pipe10, Rotate11, Pipe7, zoom_win1, Copy5, layer2, layer3, layer4)
    two ← stack(Elbow1, Rotate7, zoom_win2, Copy1, Copy2, Copy6, Copy3, zoom_win1, Rotate8, Rotate9, Copy4, layer5, layer6, layer7, Tank, layer8, layer9, layer10, cylinder, subtract, Pipe8)
    three ← stack(one, two)
    return three
Sedeff_script3(pipe2_origin, pipe3_origin, pipe4_origin, pipe5_origin, pipe6_origin, elbow1_origin, pipe7_origin, tank_origin, main_origin, p10, p11, p12, origin, lvltank_dim, Δx, Δy, Δz, thick_tank, thick_platform, width_sed, R1, R_main, H_main, n, disp) :=
    layer1 ← layer_new("lvlpipe", blue)
    Pipe1 ← Pipe(origin, R1, Δx + thick_tank + offset(lvltank_dim[0], n) - ElbowRadius(2*R1))
    Rotate1 ← rotate_3d([origin[0] + R1; origin[1]; origin[2]], origin, "y", -90)
    Pipe2 ← Pipe(pipe2_origin, R1, Δy - 2*ElbowRadius(2*R1) + thick_tank + disp)
    Rotate2 ← rotate_3d([pipe2_origin[0] + R1; pipe2_origin[1]; pipe2_origin[2]], pipe2_origin, "x", -90)
    Pipe3 ← Pipe(pipe3_origin, R1, Δx + thick_tank + 2*offset(lvltank_dim[0], n) - ElbowRadius(2*R1))
    Rotate3 ← rotate_3d([pipe3_origin[0] + R1; pipe3_origin[1]; pipe3_origin[2]], pipe3_origin, "y", -90)
    Pipe4 ← Pipe(pipe4_origin, R1, Δy + width_sed - 2*ElbowRadius(2*R1) + thick_tank + disp)
    Rotate4 ← rotate_3d([pipe4_origin[0] + R1; pipe4_origin[1]; pipe4_origin[2]], pipe4_origin, "x", -90)
    Pipe5 ← Pipe(pipe5_origin, R1, Δx + thick_tank + 3*offset(lvltank_dim[0], n) - ElbowRadius(2*R1))
    Rotate5 ← rotate_3d([pipe5_origin[0] + R1; pipe5_origin[1]; pipe5_origin[2]], pipe5_origin, "y", -90)
    Pipe6 ← Pipe(pipe6_origin, R1, Δy + 2*width_sed - 2*ElbowRadius(2*R1) + thick_tank + disp)
    Rotate6 ← rotate_3d([pipe6_origin[0] + R1; pipe6_origin[1]; pipe6_origin[2]], pipe6_origin, "x", -90)
    Pipe9 ← Pipe(p10, R1, Δx + thick_tank + 4*offset(lvltank_dim[0], n) - ElbowRadius(2*R1))
    Rotate10 ← rotate_3d([p10[0] + R1; p10[1]; p10[2]], p10, "y", -90)
    Pipe10 ← Pipe(p11, R1, Δy + 3*width_sed - 2*ElbowRadius(2*R1) + thick_tank + disp)
    Rotate11 ← rotate_3d([p11[0] + R1; p11[1]; p11[2]], p11, "x", -90)
    Pipe11 ← Pipe([origin[0]; origin[1] - 4*width_sed; origin[2]], R1, Δx + thick_tank + 5*offset(lvltank_dim[0], n) - ElbowRadius(2*R1))
    Rotate12 ← rotate_3d([origin[0] + R1; origin[1] - 4*width_sed; origin[2]], [origin[0]; origin[1] - 4*width_sed; origin[2]], "y", -90)
    Pipe12 ← Pipe(p12, R1, Δy + 4*width_sed - 2*ElbowRadius(2*R1) + thick_tank + disp)
    Rotate13 ← rotate_3d([p12[0] + R1; p12[1]; p12[2]], p12, "x", -90)
    Pipe7 ← Pipe([pipe7_origin[0]; pipe7_origin[1]; pipe7_origin[2]], R1, Δz - ElbowRadius(2*R1) + thick_platform)
    zoom_win1 ← zoom_win(tank_origin, [tank_origin[0] - lvltank_dim[0]; tank_origin[1] + lvltank_dim[1]; tank_origin[2]])
    Copy5 ← copyE([pipe7_origin[0] + R1; pipe7_origin[1]; pipe7_origin[2]], pipe7_origin, [-offset(lvltank_dim[0], n); 0; 0], [-2*offset(lvltank_dim[0], n); 0; 0], [-3*offset(lvltank_dim[0], n); 0; 0], [-4*offset(lvltank_dim[0], n); 0; 0])
    Pipe8 ← Pipe(main_origin, R_main, H_main + thick_platform + Δz)
    layer2 ← layer_set("0")
    layer3 ← layer_freeze("lvlpipe")
    layer4 ← layer_new("lvlelbow", green)
    Elbow1 ← elbow(elbow1_origin, R1)
    Rotate7 ← rotate_3d([elbow1_origin[0]; elbow1_origin[1] + ElbowRadius(2*R1); elbow1_origin[2]], [elbow1_origin[0]; elbow1_origin[1] + ElbowRadius(2*R1); elbow1_origin[2]], "z", -180)
    zoom_win2 ← zoom_win([origin[0] - Δx; origin[1] + 2*ElbowRadius(2*R1); origin[2]], [p12[0] - 2*ElbowRadius(2*R1); p12[1] - 2*ElbowRadius(2*R1); pipe6_origin[2]])
    Copy1 ← copyB(pipe2_origin, pipe2_origin, pipe4_origin)
    Copy2 ← copyB(pipe2_origin, pipe2_origin, pipe6_origin)
    Copy6 ← copyB(pipe2_origin, pipe2_origin, p11)
    Copy7 ← copyB(pipe2_origin, pipe2_origin, p12)
    Copy3 ← copyB(pipe2_origin, pipe2_origin, [pipe2_origin[0]; pipe2_origin[1] + (Δy - 2*ElbowRadius(2*R1) + thick_tank + disp); pipe2_origin[2]])
    Rotate8 ← rotate_3d([pipe2_origin[0]; pipe2_origin[1] + (Δy - 2*ElbowRadius(2*R1) + thick_tank + disp); pipe2_origin[2]], [pipe2_origin[0]; pipe2_origin[1] + (Δy - 2*ElbowRadius(2*R1) + thick_tank + disp); pipe2_origin[2]], "x", 180)
    Rotate9 ← rotate_3d([pipe2_origin[0]; pipe2_origin[1] + (Δy - 2*ElbowRadius(2*R1) + thick_tank + disp); pipe2_origin[2]], [pipe2_origin[0]; pipe2_origin[1] + (Δy - 2*ElbowRadius(2*R1) + thick_tank + disp); pipe2_origin[2]], "y", -90)
    Copy4 ← copyE([pipe2_origin[0]; pipe2_origin[1] + (Δy - 2*ElbowRadius(2*R1) + thick_tank + disp); pipe2_origin[2]], [pipe2_origin[0]; pipe2_origin[1] + (Δy - 2*ElbowRadius(2*R1) + thick_tank + disp); pipe2_origin[2]], [-offset(lvltank_dim[0], n); 0; 0], [-2*offset(lvltank_dim[0], n); 0; 0], [-3*offset(lvltank_dim[0], n); 0; 0], [-4*offset(lvltank_dim[0], n); 0; 0])
    layer5 ← layer_set("0")
    layer6 ← layer_freeze("lvlelbow")
    layer7 ← layer_new("lvltank", grey)
    Tank ← Tank(tank_origin, lvltank_dim, thick_tank)
    layer8 ← layer_thaw("lvlpipe")
    layer9 ← layer_thaw("lvlelbow")
    layer10 ← layer_set("lvlpipe")
    cylinder ← cylinderC(main_origin, R_main, H_main + thick_platform + Δz)
    subtract ← subtractD(tank_origin, [main_origin[0] + R_main; main_origin[1]; main_origin[2]])
    one ← stack(layer1, Pipe1, Rotate1, Pipe2, Rotate2, Pipe3, Rotate3, Pipe4, Rotate4, Pipe5, Rotate5, Pipe6, Rotate6, Pipe9, Rotate10, Pipe10, Rotate11, Pipe11, Rotate12, Pipe12, Rotate13, Pipe7, zoom_win1, Copy5)
    two ← stack(layer2, layer3, layer4, Elbow1, Rotate7, zoom_win2, Copy1, Copy2, Copy6, Copy7, Copy3, zoom_win1, Rotate8, Rotate9, Copy4, layer5, layer6, layer7, Tank, layer8, layer9, layer10, cylinder, subtract, Pipe8)
    three ← stack(one, two)
    return three
Sed_eff(origin, width_sed, lvltank_dim, Δx, Δy, Δz, lvltank_thick, thick_platform, R1, R_main, H_main, n, disp) :=
    if n == 3
        ans ← Sedeff_script1([
            origin[0] - (Δx + lvltank_thick + offset(lvltank_dim[0], n));
            origin[1] + ElbowRadius(2*R1);
            origin[2]
        ], [origin[0]; origin[1] - width_sed; origin[2]], [
            origin[0] - Δx - lvltank_thick - 2*offset(lvltank_dim[0], n);
            origin[1] - width_sed + ElbowRadius(2*R1);
            origin[2]
        ], [origin[0]; origin[1] - 2*width_sed; origin[2]], [
            origin[0] - Δx - lvltank_thick - 3*offset(lvltank_dim[0], n);
            origin[1] - 2*width_sed + ElbowRadius(2*R1);
            origin[2]
        ], [
            origin[0] - Δx - lvltank_thick - offset(lvltank_dim[0], n) + ElbowRadius(2*R1);
            origin[1] - ElbowRadius(2*R1);
            origin[2]
        ], [
            origin[0] - Δx - lvltank_thick - offset(lvltank_dim[0], n);
            origin[1] + Δy + lvltank_thick + disp;
            origin[2] + ElbowRadius(2*R1)
        ], [origin[0] - Δx - lvltank_thick; origin[1] + Δy + lvltank_thick; origin[2] + Δz + thick_platform], [
            origin[0] - Δx - lvltank_thick - lvltank_dim[0]/2;
            origin[1] + Δy + lvltank_thick + lvltank_dim[1] - disp;
            origin[2]
        ], origin, lvltank_dim, Δx, Δy, Δz, lvltank_thick, thick_platform, width_sed, R1, R_main, H_main, n, disp)
    if n == 4
        ans ← Sedeff_script2([
            origin[0] - (Δx + lvltank_thick + offset(lvltank_dim[0], n));
            origin[1] + ElbowRadius(2*R1);
            origin[2]
        ], [origin[0]; origin[1] - width_sed; origin[2]], [
            origin[0] - Δx - lvltank_thick - 2*offset(lvltank_dim[0], n);
            origin[1] - width_sed + ElbowRadius(2*R1);
            origin[2]
        ], [origin[0]; origin[1] - 2*width_sed; origin[2]], [
            origin[0] - Δx - lvltank_thick - 3*offset(lvltank_dim[0], n);
            origin[1] - 2*width_sed + ElbowRadius(2*R1);
            origin[2]
        ], [
            origin[0] - Δx - lvltank_thick - offset(lvltank_dim[0], n) + ElbowRadius(2*R1);
            origin[1] - ElbowRadius(2*R1);
            origin[2]
        ], [
            origin[0] - Δx - lvltank_thick - offset(lvltank_dim[0], n);
            origin[1] + Δy + lvltank_thick + disp;
            origin[2] + ElbowRadius(2*R1)
        ], [origin[0] - Δx - lvltank_thick; origin[1] + Δy + lvltank_thick; origin[2] + Δz + thick_platform], [
            origin[0] - Δx - lvltank_thick - lvltank_dim[0]/2;
            origin[1] + Δy + lvltank_thick + lvltank_dim[1] - disp;
            origin[2]
        ], [origin[0]; origin[1] - 3*width_sed; origin[2]], [
            origin[0] - Δx - lvltank_thick - 4*offset(lvltank_dim[0], n);
            origin[1] - 3*width_sed + ElbowRadius(2*R1);
            origin[2]
        ], origin, lvltank_dim, Δx, Δy, Δz, lvltank_thick, thick_platform, width_sed, R1, R_main, H_main, n, disp)
    if n == 5
        ans ← Sedeff_script3([
            origin[0] - (Δx + lvltank_thick + offset(lvltank_dim[0], n));
            origin[1] + ElbowRadius(2*R1);
            origin[2]
        ], [origin[0]; origin[1] - width_sed; origin[2]], [
            origin[0] - Δx - lvltank_thick - 2*offset(lvltank_dim[0], n);
            origin[1] - width_sed + ElbowRadius(2*R1);
            origin[2]
        ], [origin[0]; origin[1] - 2*width_sed; origin[2]], [
            origin[0] - Δx - lvltank_thick - 3*offset(lvltank_dim[0], n);
            origin[1] - 2*width_sed + ElbowRadius(2*R1);
            origin[2]
        ], [
            origin[0] - Δx - lvltank_thick - offset(lvltank_dim[0], n) + ElbowRadius(2*R1);
            origin[1] - ElbowRadius(2*R1);
            origin[2]
        ], [
            origin[0] - Δx - lvltank_thick - offset(lvltank_dim[0], n);
            origin[1] + Δy + lvltank_thick + disp;
            origin[2] + ElbowRadius(2*R1)
        ], [origin[0] - Δx - lvltank_thick; origin[1] + Δy + lvltank_thick; origin[2] + Δz + thick_platform], [
            origin[0] - Δx - lvltank_thick - lvltank_dim[0]/2;
            origin[1] + Δy + lvltank_thick + lvltank_dim[1] - disp;
            origin[2]
        ], [origin[0]; origin[1] - 3*width_sed; origin[2]], [
            origin[0] - Δx - lvltank_thick - 4*offset(lvltank_dim[0], n);
            origin[1] - 3*width_sed + ElbowRadius(2*R1);
            origin[2]
        ], [
            origin[0] - Δx - lvltank_thick - 5*offset(lvltank_dim[0], n);
            origin[1] - 4*width_sed + ElbowRadius(2*R1);
            origin[2]
        ], origin, lvltank_dim, Δx, Δy, Δz, lvltank_thick, thick_platform, width_sed, R1, R_main, H_main, n, disp)
    return ans
Drawing_sedeff := Sed_eff(sedeff_origin, tank_dim[1], lvltank_dim, walkway_width, tank_dim[1]/2 + tank_thick + floc_dim[1] - grit_dim[1] - lvltank_dim[1] - 2*lvltank_thick, Δz_effluent, lvltank_thick, platform_thick, lvlpipe_inr, effluent_inr, lvltank_waterlvl, num_tanks, wall_disp)
# [component: inputs Drawing_sedeff]
