# [reference: SedTank.xmcd]
# [reference: basics.xmcd]
# [reference: inputs.xmcd]
rotate_angle := 90
slope_height := 2.5  # This to be set from inputs?
ϕ := 60 deg
slope_param := slope_height/tan(ϕ)
slope_param = 1.44338
z_rotation := 0
sedslopescript(p1, p2, p3, p4) :=
    pline1 ← pline([0; 0], [-slope_param; 0], [0; slope_height])
    extrude1 ← extrudeA(p1, 20, 0)
    rotate3d1 ← rotateA_3d(p1, "xaxis", p1, 90)
    rotate3d2 ← rotateA_3d(p1, "zaxis", p1, 270)
    mirror3d1 ← mirror3dA(p1, p2)
    one ← stack(pline1, extrude1, rotate3d1, rotate3d2, mirror3d1)
    return one
sedslope(p1, p2, p3, p4) := sedslopescript([0; 0; 0], [0; tank_dim[1]/2; 0], [-tank_dim[0]; tank_dim[1]/2; 0], [-tank_dim[0]; -tank_dim[1]/2; slope_height])
Drawing_sedslope := sedslope([0; 0; 0], [0; 2.5; 0], [-20; 2.5; 0], [-20; 2.5; 7.5])
# [component: inputs Drawing_sedslope]
