# [reference: basics.xmcd]
# [reference: inputs.xmcd]
sedslopescript(origin, p2, tank_length, slope_width, slope_height) :=
    pline1 ← pline([origin[0]; origin[1]], [origin[0] - slope_width; origin[1]], [origin[0]; origin[1] + slope_height])
    extrude1 ← extrude(origin, tank_dim[0])
    rotate3d1 ← rotate_3d(origin, origin, "x", 90)
    rotate3d2 ← rotate_3d(origin, origin, "z", 270)
    mirror3d1 ← mirror3d(origin, p2)
    one ← stack(viewtop1, pline1, extrude1, rotate3d1, rotate3d2, mirror3d1)
    return one
sedslope(origin, tank_dim, slope_width, slope_height) := sedslopescript([origin[0]; origin[1]; origin[2]], [origin[0]; origin[1] + tank_dim[1]/2; origin[2]], tank_dim[0], slope_width, slope_height)
Drawing_sedslope := sedslope([0; 0; 0]*m, tank_dim, .75 m, .75 m)
# [component: inputs Drawing_sedslope]
