# [reference: basics.xmcd]
# [reference: pipe.no_zoom.xmcd]
Sludgescript(p1, p2, p3, p4, p5, p6, p7, p8, R1, R2, R3, L, n1, n2, d1, win1, win2) :=
    viewtop ← viewtop
    zoom_win ← zoom_wina(win1, win2)
    pipe1 ← Pipe_nz(p1, R2, L)
    cylinder3 ← cylinderD(p2, R3, p3)
    zoom1 ← zoom
    viewrightside ← viewrightside
    array1 ← array(p4, n1, n2, -d1)
    subtract2 ← subtractG(p5, p6, p7)
    one ← concat(viewtop, zoom_win, pipe1)
    two ← cylinder3
    three ← concat(zoom1, viewrightside1)
    four ← concat(array1, viewtop, subtract2)
    return stack(one, two, three, four)
Sludgepipe1(sludgepipe_origin, sludgepipe_outr, sludgepipe_inr, rad_hole, tank_length, orifice_dist) := Sludgescript([sludgepipe_origin[0]; sludgepipe_origin[1]; sludgepipe_origin[2]], [sludgepipe_origin[0]; sludgepipe_origin[1]; sludgepipe_origin[2] + tank_length - orifice_dist], [
    sludgepipe_origin[0];
    sludgepipe_origin[1] + sludgepipe_outr + zc;
    sludgepipe_origin[2] + tank_length - orifice_dist
], [
    sludgepipe_origin[1] + sludgepipe_outr + zc;
    sludgepipe_origin[2] + tank_length - orifice_dist;
    sludgepipe_origin[0]
], [sludgepipe_origin[0]; sludgepipe_origin[1] - sludgepipe_outr], [(sludgepipe_origin[0] + zc)/2; (sludgepipe_origin[1] + zc*tan(π/3))/2], [sludgepipe_origin[0]; sludgepipe_origin[1]], [sludgepipe_origin[0] + zc; sludgepipe_origin[1] + zc*tan(π/3)], sludgepipe_outr, sludgepipe_inr, rad_hole, tank_length, floor(tank_length/orifice_dist), 1, orifice_dist, [
    sludgepipe_origin[0] - sludgepipe_outr;
    sludgepipe_origin[1] - sludgepipe_outr;
    sludgepipe_origin[2]
], [
    sludgepipe_origin[0] + sludgepipe_outr;
    sludgepipe_origin[1] + sludgepipe_outr + zc;
    sludgepipe_origin[2]
])
# p1 | p2 | p3 | p4 | p5 | p6 | p7 | p8
Sludgepipe(sludgepipe_origin, pipe_inr, tank_length, orifice_rad, orifice_dist) := Sludgepipe1(sludgepipe_origin, outerradius(2*pipe_inr), pipe_inr, orifice_rad, tank_length, orifice_dist)
Drawing_Sludgepipe := Sludgepipe([1; 2; 3]*m, 2.5 in, 15 m, .25 in, 4 in)
# [component: inputs Drawing_Sludgepipe]
