# [reference: basics.2006.xmcd]
# [reference: inputs.xmcd]
# [reference: tank.xmcd]
Floctankscript1(dkgrey, tank_origin, tank_dim, floc_origin, floc_dim, wall_origin, wall_dim, channel_dim, tank_thick) :=
    layer1 ← layer_new("floctank", dkgrey)
    tank1 ← Tank(floc_origin, floc_dim, tank_thick)
    box1 ← box(wall_origin, [wall_origin[0] + wall_dim[0]; wall_origin[1] + wall_dim[1]; wall_origin[2] + wall_dim[2]])
    union1 ← unionC([floc_origin[0] - floc_dim[0] - tank_thick - 1; floc_origin[1] - tank_thick - 1; floc_origin[2]], [floc_origin[0] + tank_thick + 1; floc_origin[1] + floc_dim[1] + tank_thick + 1; floc_origin[2]])
    box2 ← box([
        floc_origin[0] - floc_dim[0];
        floc_origin[1] - tank_thick;
        floc_origin[2] + floc_dim[2] - channel_dim[2]
    ], [floc_origin[0] - floc_dim[0] + channel_dim[1]; floc_origin[1]; (floc_origin[2] + floc_dim[2])])
    subtract1 ← subtractD(floc_origin, [
        floc_origin[0] - floc_dim[0];
        floc_origin[1] - tank_thick;
        floc_origin[2] + floc_dim[2] - channel_dim[2]
    ])
    layerset ← layer_set("0")
    layerfreeze1 ← layer_freeze("floctank")
    one ← stack(layer1, tank1, box1, union1, box2, subtract1, layerset, layerfreeze1)
    return ← one
Floctank(dkgrey, tank_origin, tank_dim, floc_dim, channel_dim, tank_thick) := Floctankscript1(dkgrey, tank_origin, tank_dim, [tank_origin[0]; tank_origin[1] + (3*tank_dim[1]) + 3*tank_thick; tank_origin[2]], floc_dim, [
    tank_origin[0] - floc_dim[0] - tank_thick;
    tank_origin[1] + (3*tank_dim[1]) + 3*tank_thick + floc_dim[1]/2 - tank_thick/2;
    tank_origin[2]
], wall_dim, channel_dim, tank_thick)
Drawing_Floctank := Floctank(dkgrey, tank_origin, tank_dim, floc_dim, channel_dim, tank_thick)
# [component: inputs Drawing_Floctank]
