# [reference: basics.xmcd]
# [reference: inputs.xmcd]
# [reference: tank.xmcd]
# [reference: lamina.xmcd]
Floctankscript1(dkgrey, tank_origin, tank_dim, floc_origin, floc_dim, wall_origin, wall_dim, channel_dim, tank_thick) :=
    layer1 ← layer_new("floctank", dkgrey)
    tank1 ← Tank(floc_origin, floc_dim, tank_thick)
    box1 ← box(wall_origin, [wall_origin[0] + wall_dim[0]; wall_origin[1] + wall_dim[1]; wall_origin[2] + wall_dim[2]])
    union1 ← unionC([floc_origin[0] - floc_dim[0] - tank_thick - zc; floc_origin[1] - tank_thick - zc; floc_origin[2]], [floc_origin[0] + tank_thick + zc; floc_origin[1] + floc_dim[1] + tank_thick + zc; floc_origin[2]])
    box2 ← box([
        floc_origin[0] - floc_dim[0];
        floc_origin[1] - tank_thick;
        floc_origin[2] + floc_dim[2] - channel_dim[2]
    ], [floc_origin[0] - floc_dim[0] + channel_dim[1]; floc_origin[1]; (floc_origin[2] + floc_dim[2])])
    subtract1 ← subtractD(floc_origin, [
        floc_origin[0] - floc_dim[0];
        floc_origin[1] - tank_thick;
        floc_origin[2] + floc_dim[2] - channel_dim[2]
    ])
    layerset ← layer_set("0")
    layerfreeze1 ← layer_freeze("floctank ")
    one ← stack(layer1, tank1, box1, union1, box2, subtract1, layerset, layerfreeze1)
    return one
Floctank1(dkgrey, tank_origin, tank_dim, floc_dim, channel_dim, tank_thick) := Floctankscript1(dkgrey, tank_origin, tank_dim, [tank_origin[0]; tank_origin[1] + (3*tank_dim[1]) + 3*tank_thick; tank_origin[2]], floc_dim, [
    tank_origin[0] - floc_dim[0] - tank_thick;
    tank_origin[1] + (3*tank_dim[1]) + 3*tank_thick + floc_dim[1]/2 - tank_thick/2;
    tank_origin[2]
], wall_dim, channel_dim, tank_thick)
Floctankscript2(ltpurple, baffles_origin, baffle_amp, baffle_width, baffle_length, baffle_thick, baffle_periods, baffle_slope, baffle_num, baffle_col, baffle_x, baffle_y) :=
    baffle[0] ← layer_new("baffle", dkgrey)
    for i ∈ 0 .. baffle_num - 1
        baffle_origin[i] ← baffles_origin + [baffle_location[i, 0]; 0; baffle_location[i, 1]]
        baffle[i + 1] ← lamina(baffle_origin[i], baffle_amp, baffle_width, baffle_length, baffle_thick, baffle_periods, baffle_slope, baffle_num, baffle_col, baffle_x, baffle_y)
    baffle[baffle_num + 1] ← layer_set("0")
    baffle[baffle_num + 2] ← layer_freeze("baffle")
    baffle
Floctank2(ltpurple, tank_origin, tank_dim, tank_thick, floc_dim, wall_dim, baffle_amp, baffle_width, baffle_length, baffle_thick, baffle_periods, baffle_slope, baffle_num, baffle_col, baffle_x, baffle_y) := Floctankscript2(ltpurple, [
    tank_origin[0];
    tank_origin[1] + 3*(tank_dim[1] + tank_thick) + (floc_dim[1] + wall_dim[1])/2;
    tank_origin[2]
], baffle_amp, baffle_width, baffle_length, baffle_thick, baffle_periods, baffle_slope, baffle_num, baffle_col, baffle_x, baffle_y)
Floctank(dkgrey, ltpurple, tank_origin, tank_dim, floc_dim, wall_dim, channel_dim, tank_thick, baffle_amp, baffle_width, baffle_length, baffle_thick, baffle_periods, baffle_slope, baffle_num, baffle_col, baffle_x, baffle_y) := stack(Floctank1(dkgrey, tank_origin, tank_dim, floc_dim, channel_dim, tank_thick), Floctank2(ltpurple, tank_origin, tank_dim, tank_thick, floc_dim, wall_dim, baffle_amp, baffle_width, baffle_length, baffle_thick, baffle_periods, baffle_slope, baffle_num, baffle_col, baffle_x, baffle_y))
Drawing_Floctank := Floctank(dkgrey, ltpurple, tank_origin, tank_dim, floc_dim, wall_dim, channel_dim, tank_thick, baffle_amp, baffle_width, baffle_length, baffle_thick, baffle_periods, baffle_slope, baffle_num, baffle_col, baffle_x, baffle_y)
# [component: inputs Drawing_Floctank]
