## References
# [reference: cross.xmcd]
# [reference: Tee.xmcd]
# [reference: elbow.xmcd]
# [reference: pipe.xmcd]
# [reference: tank.xmcd]
# [reference: basics.xmcd]
# [reference: inputs.xmcd]
# [reference: Sludge.xmcd]
## Pipe Origins
origin := grit_origin
pipe3_origin := [
    origin[0] - gritdisp1 - 2*ElbowRadius(2*gritpipe_inr);
    origin[1];
    origin[2] + Δz_grit - ElbowRadius(2*gritpipe_inr) - SocketDepth(2*gritpipe_inr)
]
pipe2_origin := [
    origin[0] - gritdisp1 - ElbowRadius(2*gritpipe_inr);
    origin[1];
    origin[2] + ElbowRadius(2*gritpipe_inr)
]
pipe5_origin := [
    origin[0] - Δx_grit - 2*grit_thick - grit_dim[0] - ShortTeeLength(2*gritpipe_inr) - SocketDepth(2*gritpipe_inr);
    origin[1] + Δy_grit + grit_thick + grit_dim[1]/2;
    origin[2] + Δz_grit - SocketDepth(2*gritpipe_inr)
]
pipe4_origin := [
    origin[0] - Δx_grit - 2*grit_thick - grit_dim[0] - ShortTeeLength(2*gritpipe_inr) - SocketDepth(2*gritpipe_inr);
    origin[1] + Δy_grit + grit_thick + grit_dim[1]/2;
    origin[2] + Δz_grit + platform_thick + grit_dim[2]/2 + TeeLength(2*gritpipe_inr)/2
]
pipe6_origin := [
    origin[0] - Δx_grit - grit_thick - grit_dim[0];
    origin[1] + Δy_grit + grit_thick + grit_dim[1]/2;
    origin[2] + Δz_grit + platform_thick + grit_dim[2]/2
]
pipe7_origin := [
    origin[0] - Δx_grit - grit_thick - grit_dim[0] + gritdisp2 + CrossLength(2*gritpipe_inr);
    origin[1] + Δy_grit + grit_thick + grit_dim[1]/2;
    origin[2] + Δz_grit + platform_thick + grit_dim[2]/2
]
grittank_origin := [
    origin[0] - Δx_grit - grit_thick;
    origin[1] + Δy_grit + grit_thick;
    origin[2] + Δz_grit + platform_thick
]
Grit_script :=
    layer1 ← layer_new("grit-pipe", blue)
    Pipe1 ← Pipe(origin, gritpipe_inr, gritdisp1)
    Rotate1 ← rotate_3d([origin[0] + gritpipe_inr; origin[1]; origin[2]], origin, "y", -90)
    Pipe2 ← Pipe(pipe2_origin, gritpipe_inr, Δz_grit - 3*ElbowRadius(2*gritpipe_inr) - SocketDepth(2*gritpipe_inr))
    Pipe3 ← Pipe(pipe3_origin, gritpipe_inr, ((Δx_grit + 2*grit_thick + grit_dim[0] + ShortTeeLength(2*gritpipe_inr) + SocketDepth(2*gritpipe_inr) - ElbowRadius(2*gritpipe_inr) - gritdisp1)^2 + (Δy_grit + grit_thick + grit_dim[1]/2)^2)^.5 - 2*ElbowRadius(2*gritpipe_inr))
    Rotate2 ← rotate_3d([pipe3_origin[0] + gritpipe_inr; pipe3_origin[1]; pipe3_origin[2]], pipe3_origin, "y", -90)
    layer2 ← layer_set("0")
    layer3 ← layer_freeze("grit-pipe")
    layer4 ← layer_new("grit-elbow", green)
    elbow1 ← elbow([origin[0] - gritdisp1 - ElbowRadius(2*gritpipe_inr); origin[1]; origin[2]], gritpipe_inr)
    Rotate3 ← rotate_3d([origin[0] - gritdisp1; origin[1]; origin[2]], [origin[0] - gritdisp1; origin[1]; origin[2]], "z", 90)
    Rotate4 ← rotate_3d([origin[0] - gritdisp1; origin[1]; origin[2]], [origin[0] - gritdisp1; origin[1]; origin[2]], "x", -90)
    elbow2 ← elbow([
        pipe2_origin[0] - ElbowRadius(2*gritpipe_inr);
        pipe2_origin[1];
        pipe2_origin[2] + Δz_grit - 3*ElbowRadius(2*gritpipe_inr) - SocketDepth(2*gritpipe_inr)
    ], gritpipe_inr)
    Rotate5 ← rotate_3d([
        pipe2_origin[0];
        pipe2_origin[1];
        pipe2_origin[2] + Δz_grit - 3*ElbowRadius(2*gritpipe_inr) - SocketDepth(2*gritpipe_inr)
    ], [
        pipe2_origin[0] - ElbowRadius(2*gritpipe_inr);
        pipe2_origin[1];
        pipe2_origin[2] + Δz_grit - 3*ElbowRadius(2*gritpipe_inr) - SocketDepth(2*gritpipe_inr)
    ], "x", 90)
    layer5 ← layer_thaw("grit-pipe")
    Rotate6 ← rotate_3dA([pipe3_origin[0]; pipe3_origin[1] - ConRadius(2*gritpipe_inr) - zc; pipe3_origin[2]], [
        pipe3_origin[0] - SocketDepth(2*gritpipe_inr) - zc;
        pipe3_origin[1] + ConRadius(2*gritpipe_inr) + zc;
        pipe3_origin[2]
    ], [
        pipe2_origin[0];
        pipe2_origin[1];
        pipe2_origin[2] + Δz_grit - 3*ElbowRadius(2*gritpipe_inr) - SocketDepth(2*gritpipe_inr)
    ], "z", -(90 - atan((Δx_grit + 2*grit_thick + grit_dim[0] + ShortTeeLength(2*gritpipe_inr) + SocketDepth(2*gritpipe_inr) - ElbowRadius(2*gritpipe_inr) - gritdisp1)/(Δy_grit + grit_thick + grit_dim[1]/2))*180/π))
    elbow3 ← elbow([pipe5_origin[0]; pipe5_origin[1]; pipe5_origin[2] - ElbowRadius(2*gritpipe_inr)], gritpipe_inr)
    Rotate7 ← rotate_3d([
        pipe5_origin[0] + ElbowRadius(2*gritpipe_inr);
        pipe5_origin[1];
        pipe5_origin[2] - ElbowRadius(2*gritpipe_inr)
    ], [
        pipe5_origin[0] + ElbowRadius(2*gritpipe_inr);
        pipe5_origin[1];
        pipe5_origin[2] - ElbowRadius(2*gritpipe_inr)
    ], "z", 90)
    Rotate8 ← rotate_3d([
        pipe5_origin[0] + ElbowRadius(2*gritpipe_inr);
        pipe5_origin[1];
        pipe5_origin[2] - ElbowRadius(2*gritpipe_inr)
    ], [
        pipe5_origin[0] + ElbowRadius(2*gritpipe_inr);
        pipe5_origin[1];
        pipe5_origin[2] - ElbowRadius(2*gritpipe_inr)
    ], "x", -90)
    Rotate9 ← rotate_3d(pipe5_origin, pipe5_origin, "z", -atan((Δy_grit + grit_thick + grit_dim[1]/2)/(Δx_grit + 2*grit_thick + grit_dim[0] + ShortTeeLength(2*gritpipe_inr) + SocketDepth(2*gritpipe_inr) - ElbowRadius(2*gritpipe_inr) - gritdisp1))*180/π)
    layer6 ← layer_set("grit-pipe")
    layer7 ← layer_freeze("grit-elbow")
    Pipe4 ← Pipe(pipe4_origin, gritpipe_inr, grit_dim[2]/2)
    Pipe5 ← Pipe(pipe5_origin, gritpipe_inr, platform_thick + grit_dim[2]/2 - TeeLength(2*gritpipe_inr)/2)
    Pipe6 ← Pipe(pipe6_origin, gritpipe_inr, gritdisp2)
    Rotate10 ← rotate_3d([pipe6_origin[0] + gritpipe_inr; pipe6_origin[1]; pipe6_origin[2]], pipe6_origin, "y", 90)
    Pipe7 ← Pipe(pipe7_origin, gritpipe_inr, 2*SocketDepth(2*gritpipe_inr))
    Rotate11 ← rotate_3d([pipe7_origin[0] + gritpipe_inr; pipe7_origin[1]; pipe7_origin[2]], pipe7_origin, "y", 90)
    Pipe8 ← arrayA([pipe7_origin[0]; pipe7_origin[1] + gritpipe_inr; pipe7_origin[2]], [pipe7_origin[0] - CrossLength(2*gritpipe_inr)/2; pipe7_origin[1]; pipe7_origin[2]], 2, -90)
    Pipe9 ← arrayA([pipe7_origin[0]; pipe7_origin[1] + gritpipe_inr; pipe7_origin[2]], [pipe7_origin[0] - CrossLength(2*gritpipe_inr)/2; pipe7_origin[1]; pipe7_origin[2]], 2, 90)
    zoom1 ← zoom_win(grittank_origin, [
        grittank_origin[0] - grit_dim[0];
        grittank_origin[1] + grit_dim[1];
        grittank_origin[2] + grit_dim[2]
    ])
    Pipe_10and11 ← copyG([
        pipe7_origin[0] - CrossLength(2*gritpipe_inr)/2 + outerradius(2*gritpipe_inr);
        pipe7_origin[1] - CrossLength(2*gritpipe_inr)/2;
        pipe7_origin[2]
    ], [
        pipe7_origin[0] - CrossLength(2*gritpipe_inr)/2 + outerradius(2*gritpipe_inr);
        pipe7_origin[1] + CrossLength(2*gritpipe_inr)/2;
        pipe7_origin[2]
    ], [
        pipe7_origin[0] - CrossLength(2*gritpipe_inr)/2;
        pipe7_origin[1] - CrossLength(2*gritpipe_inr)/2;
        pipe7_origin[2]
    ], [
        pipe7_origin[0] + (2*SocketDepth(2*gritpipe_inr) + ShortTeeLength(2*gritpipe_inr));
        pipe7_origin[1] - CrossLength(2*gritpipe_inr)/2;
        pipe7_origin[2]
    ])
    layer8 ← layer_new("grit-riser", blue)
    layer9 ← layer_freeze("grit-pipe")
    Riser1 ← Sludgepipe([
        pipe7_origin[0] + ShortTeeLength(2*gritpipe_inr) + 2*SocketDepth(2*gritpipe_inr);
        pipe7_origin[1] - TeeLength(2*gritpipe_inr)/2 - ElbowRadius(2*gritpipe_inr) - 2*SocketDepth(2*gritpipe_inr);
        pipe7_origin[2] + ElbowRadius(2*gritpipe_inr)
    ], gritpipe_inr, gritriser_h, grit_rad, gritriser_h/grit_holes)
    Riser_234 ← copyD([
        pipe7_origin[0] + ShortTeeLength(2*gritpipe_inr) + 2*SocketDepth(2*gritpipe_inr);
        pipe7_origin[1] - TeeLength(2*gritpipe_inr)/2 - ElbowRadius(2*gritpipe_inr) - gritpipe_inr - 2*SocketDepth(2*gritpipe_inr);
        pipe7_origin[2] + ElbowRadius(2*gritpipe_inr)
    ], [
        pipe7_origin[0] + ShortTeeLength(2*gritpipe_inr) + 2*SocketDepth(2*gritpipe_inr);
        pipe7_origin[1] - TeeLength(2*gritpipe_inr)/2 - 2*ElbowRadius(2*gritpipe_inr);
        pipe7_origin[2] + ElbowRadius(2*gritpipe_inr)
    ], [
        -2*SocketDepth(2*gritpipe_inr) - ShortTeeLength(2*gritpipe_inr) - CrossLength(2*gritpipe_inr)/2;
        0;
        0
    ], [0; TeeLength(2*gritpipe_inr) + 2*ElbowRadius(2*gritpipe_inr) + 4*SocketDepth(2*gritpipe_inr); 0], [
        -2*SocketDepth(2*gritpipe_inr) - ShortTeeLength(2*gritpipe_inr) - CrossLength(2*gritpipe_inr)/2;
        TeeLength(2*gritpipe_inr) + 2*ElbowRadius(2*gritpipe_inr) + 4*SocketDepth(2*gritpipe_inr);
        0
    ])
    layer10 ← layer_new("grit-cross", purple)
    layer11 ← layer_freeze("grit-riser")
    cross ← Cross(pipe7_origin, gritpipe_inr)
    Rotate12 ← rotate_3d([pipe7_origin[0]; pipe7_origin[1] + gritpipe_inr; pipe7_origin[2]], pipe7_origin, "y", -90)
    Rotate13 ← rotate_3d([pipe7_origin[0]; pipe7_origin[1] + gritpipe_inr; pipe7_origin[2]], pipe7_origin, "x", -90)
    layer12 ← layer_thaw("grit-elbow")
    layer13 ← layer_set("grit-elbow")
    layer14 ← layer_freeze("grit-cross")
    elbow4 ← elbow([
        pipe7_origin[0] - CrossLength(2*gritpipe_inr)/2 - ElbowRadius(2*gritpipe_inr);
        pipe7_origin[1] - CrossLength(2*gritpipe_inr)/2 - 2*SocketDepth(2*gritpipe_inr);
        pipe7_origin[2]
    ], gritpipe_inr)
    Rotate14 ← rotate_3d([
        pipe7_origin[0] - CrossLength(2*gritpipe_inr)/2;
        pipe7_origin[1] - CrossLength(2*gritpipe_inr)/2 - 2*SocketDepth(2*gritpipe_inr);
        pipe7_origin[2]
    ], [
        pipe7_origin[0] - CrossLength(2*gritpipe_inr)/2;
        pipe7_origin[1] - CrossLength(2*gritpipe_inr)/2 - 2*SocketDepth(2*gritpipe_inr);
        pipe7_origin[2]
    ], "z", -180)
    Rotate15 ← rotate_3d([
        pipe7_origin[0] - CrossLength(2*gritpipe_inr)/2;
        pipe7_origin[1] - CrossLength(2*gritpipe_inr)/2 - 2*SocketDepth(2*gritpipe_inr);
        pipe7_origin[2]
    ], [
        pipe7_origin[0] - CrossLength(2*gritpipe_inr)/2;
        pipe7_origin[1] - CrossLength(2*gritpipe_inr)/2 - 2*SocketDepth(2*gritpipe_inr);
        pipe7_origin[2]
    ], "y", -90)
    elbow5 ← copyF([
        pipe7_origin[0] - CrossLength(2*gritpipe_inr)/2;
        pipe7_origin[1] - CrossLength(2*gritpipe_inr)/2 - 2*SocketDepth(2*gritpipe_inr);
        pipe7_origin[2]
    ], [
        pipe7_origin[0] - CrossLength(2*gritpipe_inr)/2;
        pipe7_origin[1] - CrossLength(2*gritpipe_inr)/2 - 2*SocketDepth(2*gritpipe_inr);
        pipe7_origin[2]
    ], [
        CrossLength(2*gritpipe_inr)/2 + ShortTeeLength(2*gritpipe_inr) + 2*SocketDepth(2*gritpipe_inr);
        0;
        0
    ])
    elbow_67 ← mirrorC([
        pipe7_origin[0] - CrossLength(2*gritpipe_inr)/2;
        pipe7_origin[1] - CrossLength(2*gritpipe_inr)/2 - 2*SocketDepth(2*gritpipe_inr);
        pipe7_origin[2]
    ], [
        pipe7_origin[0] + ShortTeeLength(2*gritpipe_inr) + 2*SocketDepth(2*gritpipe_inr);
        pipe7_origin[1] - CrossLength(2*gritpipe_inr)/2 - 2*SocketDepth(2*gritpipe_inr);
        pipe7_origin[2]
    ], [pipe7_origin[0]; pipe7_origin[1]], [pipe7_origin[0] + CrossLength(2*gritpipe_inr); pipe7_origin[1]])
    layer15 ← layer_new("grit-tee", blue3)
    layer16 ← layer_freeze("grit-elbow")
    Tee1 ← Tee(pipe4_origin, gritpipe_inr)
    move ← move([pipe4_origin[0]; pipe4_origin[1] + gritpipe_inr; pipe4_origin[2]], pipe4_origin, [0; 0; -TeeLength(2*gritpipe_inr)])
    Tee2 ← Tee([
        pipe7_origin[0] + (ShortTeeLength(2*gritpipe_inr) + 2*SocketDepth(2*gritpipe_inr));
        pipe7_origin[1];
        pipe7_origin[2] - TeeLength(2*gritpipe_inr)/2
    ], gritpipe_inr)
    Rotate16 ← rotate_3d([
        pipe7_origin[0] + (ShortTeeLength(2*gritpipe_inr) + 2*SocketDepth(2*gritpipe_inr));
        pipe7_origin[1] + gritpipe_inr;
        pipe7_origin[2] - TeeLength(2*gritpipe_inr)/2
    ], [
        pipe7_origin[0] + (ShortTeeLength(2*gritpipe_inr) + 2*SocketDepth(2*gritpipe_inr));
        pipe7_origin[1];
        pipe7_origin[2]
    ], "x", -90)
    Rotate17 ← rotate_3d([
        pipe7_origin[0] + (ShortTeeLength(2*gritpipe_inr) + 2*SocketDepth(2*gritpipe_inr));
        pipe7_origin[1] + gritpipe_inr;
        pipe7_origin[2] - TeeLength(2*gritpipe_inr)/2
    ], [
        pipe7_origin[0] + (ShortTeeLength(2*gritpipe_inr) + 2*SocketDepth(2*gritpipe_inr));
        pipe7_origin[1];
        pipe7_origin[2]
    ], "y", -180)
    layer17 ← layer_new("grit-tank", grey)
    Tank ← Tank(grittank_origin, grit_dim, grit_thick)
    layer18 ← layer_set("0")
    layer19 ← layer_freeze("grit-tank")
    layer20 ← layer_freeze("grit-tee")
    one ← stack(layer1, Pipe1, Rotate1, Pipe2, Pipe3, Rotate2, layer2, layer3, layer4, elbow1, Rotate3, Rotate4, elbow2, Rotate5, layer5, Rotate6, elbow3, Rotate7, Rotate8, Rotate9, layer6, layer7, Pipe4, Pipe5)
    two ← stack(Pipe6, Rotate10, Pipe7, Rotate11, Pipe8, Pipe9, zoom1, Pipe_10and11, layer8, layer9, Riser1, Riser_234, layer10, layer11, cross, Rotate12, Rotate13, layer12, layer13, layer14, elbow4, Rotate14)
    three ← stack(Rotate15, elbow5, elbow_67, layer15, layer16, Tee1, move, Tee2, Rotate16, Rotate17, layer17, Tank, layer18, layer19, layer20)
    return stack(one, two, three)
    = [
        "-layer m grit-pipe";
        "c t 0,255,255";
        "grit-pipe";
        "  ";
        "_zoom w -4.36195,5.58585,0.1524 -4.24765,5.70015,0.1524 _cylinder -4.3048,5.643,0.1524 0.05715 0.2032 _cylinder -4.3048,5.643,0.1524 0.0508 0.2032 _subtract -4.24765,5.643,0.1524  -4.254,5.643,0.1524 ";
        "_rotate3d -4.254,5.643,0.1524  y -4.3048,5.643,0.1524 -90";
        "_zoom w -4.71755,5.58585,0.3048 -4.60325,5.70015,0.3048 _cylinder -4.6604,5.643,0.3048 0.05715 0.8762 _cylinder -4.6604,5.643,0.3048 0.0508 0.8762 _subtract -4.60325,5.643,0.3048  -4.6096,5.643,0.3048 ";
        "_zoom w -4.86995,5.58585,1.3334 -4.75565,5.70015,1.3334 _cylinder -4.8128,5.643,1.3334 0.05715 2.95573 _cylinder -4.8128,5.643,1.3334 0.0508 2.95573 _subtract -4.75565,5.643,1.3334  -4.762,5.643,1.3334 ";
        "_rotate3d -4.762,5.643,1.3334  y -4.8128,5.643,1.3334 -90";
        "-layer s 0"
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    ]
# [component: inputs Grit_script]
