# [reference: cross.xmcd]
# [reference: Tee.xmcd]
# [reference: elbow.xmcd]
# [reference: pipe.xmcd]
# [reference: tank.xmcd]
# [reference: basics.xmcd]
# [reference: inputs.xmcd]
# [reference: Sludge.xmcd]
Grit_script(pipe2_origin, pipe3_origin, pipe4_origin, pipe5_origin, pipe6_origin, pipe7_origin, tank_origin, origin, tank_dim, Δx, Δy, Δz, thick_tank, thick_platform, R1, R_hole, H_riser, num_holes, firstdisp, seconddisp) :=
    layer1 ← layer_new("grit-pipe", blue)
    Pipe1 ← Pipe(origin, R1, firstdisp)
    Rotate1 ← rotate_3d([origin[0] + R1; origin[1]; origin[2]], origin, "y", -90)
    Pipe2 ← Pipe(pipe2_origin, R1, Δz - 3*ElbowRadius(2*R1) - SocketDepth(2*R1))
    RotateA ← rotate_3d([pipe2_origin[0] + R1; pipe2_origin[1]; pipe2_origin[2]], pipe2_origin, "x", -90)
    Pipe3 ← Pipe(pipe3_origin, R1, ((Δx + 2*thick_tank + tank_dim[0] + ShortTeeLength(2*R1) + SocketDepth(2*R1) - ElbowRadius(2*R1) - firstdisp)^2 + (Δy + thick_tank + tank_dim[1]/2)^2)^.5 - 2*ElbowRadius(2*R1))
    RotateD ← rotate_3d([pipe3_origin[0] + R1; pipe3_origin[1]; pipe3_origin[2]], pipe3_origin, "y", -90)
    layer30 ← layer_set("0")
    layer31 ← layer_freeze("grit-pipe")
    layer32 ← layer_new("grit-elbow", green)
    elbow1 ← elbow([origin[0] - firstdisp - ElbowRadius(2*R1); origin[1]; origin[2]], R1)
    Rotate6 ← rotate_3d([origin[0] - firstdisp; origin[1]; origin[2]], [origin[0] - firstdisp; origin[1]; origin[2]], "z", 90)
    Rotate7 ← rotate_3d([origin[0] - firstdisp; origin[1]; origin[2]], [origin[0] - firstdisp; origin[1]; origin[2]], "x", -90)
    elbowA ← elbow([
        pipe2_origin[0] - ElbowRadius(2*R1);
        pipe2_origin[1];
        pipe2_origin[2] + Δz - 3*ElbowRadius(2*R1) - SocketDepth(2*R1)
    ], R1)
    RotateB ← rotate_3d([pipe2_origin[0]; pipe2_origin[1]; pipe2_origin[2] + Δz - 3*ElbowRadius(2*R1) - SocketDepth(2*R1)], [
        pipe2_origin[0] - ElbowRadius(2*R1);
        pipe2_origin[1];
        pipe2_origin[2] + Δz - 3*ElbowRadius(2*R1) - SocketDepth(2*R1)
    ], "x", 90)
    layer33 ← layer_thaw("grit-pipe")
    RotateC ← rotate_3dA([pipe3_origin[0]; pipe3_origin[1] - ConRadius(2*R1) - zc; pipe3_origin[2]], [pipe3_origin[0] - SocketDepth(2*R1) - zc; pipe3_origin[1] + ConRadius(2*R1) + zc; pipe3_origin[2]], [pipe2_origin[0]; pipe2_origin[1]; pipe2_origin[2] + Δz - 3*ElbowRadius(2*R1) - SocketDepth(2*R1)], "z", -(90 - atan((Δx + 2*thick_tank + tank_dim[0] + ShortTeeLength(2*R1) + SocketDepth(2*R1) - ElbowRadius(2*R1) - firstdisp)/(Δy + thick_tank + tank_dim[1]/2))*180/π))
    elbowB ← elbow([pipe5_origin[0]; pipe5_origin[1]; pipe5_origin[2] - ElbowRadius(2*R1)], R1)
    RotateE ← rotate_3d([pipe5_origin[0] + ElbowRadius(2*R1); pipe5_origin[1]; pipe5_origin[2] - ElbowRadius(2*R1)], [pipe5_origin[0] + ElbowRadius(2*R1); pipe5_origin[1]; pipe5_origin[2] - ElbowRadius(2*R1)], "z", 90)
    RotateF ← rotate_3d([pipe5_origin[0] + ElbowRadius(2*R1); pipe5_origin[1]; pipe5_origin[2] - ElbowRadius(2*R1)], [pipe5_origin[0] + ElbowRadius(2*R1); pipe5_origin[1]; pipe5_origin[2] - ElbowRadius(2*R1)], "x", -90)
    RotateG ← rotate_3d(pipe5_origin, pipe5_origin, "z", -atan((Δy + thick_tank + tank_dim[1]/2)/(Δx + 2*thick_tank + tank_dim[0] + ShortTeeLength(2*R1) + SocketDepth(2*R1) - ElbowRadius(2*R1) - firstdisp))*180/π)
    layer34 ← layer_set("grit-pipe")
    layer35 ← layer_freeze("grit-elbow")
    Pipe4 ← Pipe(pipe4_origin, R1, tank_dim[2]/2)
    Pipe5 ← Pipe(pipe5_origin, R1, thick_platform + tank_dim[2]/2 - TeeLength(2*R1)/2)
    Pipe6 ← Pipe(pipe6_origin, R1, seconddisp)
    RotateH ← rotate_3d([pipe6_origin[0] + R1; pipe6_origin[1]; pipe6_origin[2]], pipe6_origin, "y", 90)
    Pipe7 ← Pipe(pipe7_origin, R1, 2*SocketDepth(2*R1))
    RotateI ← rotate_3d([pipe7_origin[0] + R1; pipe7_origin[1]; pipe7_origin[2]], pipe7_origin, "y", 90)
    Pipe8 ← arrayA([pipe7_origin[0]; pipe7_origin[1] + R1; pipe7_origin[2]], [pipe7_origin[0] - CrossLength(2*R1)/2; pipe7_origin[1]; pipe7_origin[2]], 2, -90)
    Pipe9 ← arrayA([pipe7_origin[0]; pipe7_origin[1] + R1; pipe7_origin[2]], [pipe7_origin[0] - CrossLength(2*R1)/2; pipe7_origin[1]; pipe7_origin[2]], 2, 90)
    zoom1 ← zoom_win(tank_origin, [tank_origin[0] - tank_dim[0]; tank_origin[1] + tank_dim[1]; tank_origin[2] + tank_dim[2]])
    Pipe_10and11 ← copyG([
        pipe7_origin[0] - CrossLength(2*R1)/2 + outerradius(2*R1);
        pipe7_origin[1] - CrossLength(2*R1)/2;
        pipe7_origin[2]
    ], [
        pipe7_origin[0] - CrossLength(2*R1)/2 + outerradius(2*R1);
        pipe7_origin[1] + CrossLength(2*R1)/2;
        pipe7_origin[2]
    ], [pipe7_origin[0] - CrossLength(2*R1)/2; pipe7_origin[1] - CrossLength(2*R1)/2; pipe7_origin[2]], [
        pipe7_origin[0] + (2*SocketDepth(2*R1) + ShortTeeLength(2*R1));
        pipe7_origin[1] - CrossLength(2*R1)/2;
        pipe7_origin[2]
    ])
    layer16 ← layer_new("grit-riser", blue)
    layer17 ← layer_freeze("grit-pipe")
    Riser1 ← Sludgepipe([
        pipe7_origin[0] + ShortTeeLength(2*R1) + 2*SocketDepth(2*R1);
        pipe7_origin[1] - TeeLength(2*R1)/2 - ElbowRadius(2*R1) - R1 - 2*SocketDepth(2*R1);
        pipe7_origin[2] + ElbowRadius(2*R1)
    ], R1, H_riser, R_hole, H_riser/num_holes)
    Riser_234 ← copyD([
        pipe7_origin[0] + ShortTeeLength(2*R1) + 2*SocketDepth(2*R1) + R1;
        pipe7_origin[1] - TeeLength(2*R1)/2 - ElbowRadius(2*R1) - R1 - 2*SocketDepth(2*R1);
        pipe7_origin[2] + ElbowRadius(2*R1)
    ], [
        pipe7_origin[0] + ShortTeeLength(2*R1) + 2*SocketDepth(2*R1);
        pipe7_origin[1] - TeeLength(2*R1)/2 - 2*ElbowRadius(2*R1);
        pipe7_origin[2] + ElbowRadius(2*R1)
    ], [-2*SocketDepth(2*R1) - ShortTeeLength(2*R1) - CrossLength(2*R1)/2; 0; 0], [0; TeeLength(2*R1) + 2*ElbowRadius(2*R1) + 4*SocketDepth(2*R1); 0], [
        -2*SocketDepth(2*R1) - ShortTeeLength(2*R1) - CrossLength(2*R1)/2;
        TeeLength(2*R1) + 2*ElbowRadius(2*R1) + 4*SocketDepth(2*R1);
        0
    ])
    layer2 ← layer_set("0")
    layer3 ← layer_freeze("grit-riser")
    layer4 ← layer_new("grit-cross", purple)
    cross ← Cross(pipe7_origin, R1)
    Rotate5 ← rotate_3d([pipe7_origin[0] - CrossLength(2*R1)/2; pipe7_origin[1]; pipe7_origin[2]], pipe7_origin, "x", 90)
    layer5 ← layer_set("0")
    layer6 ← layer_freeze("grit-cross")
    layer7 ← layer_new("grit-elbow1", green)
    layer20 ← layer_freeze("grit-elbow1")
    layer21 ← layer_new("grit-elbow2", green)
    elbow2 ← elbow([
        pipe7_origin[0] + CrossLength(2*R1)/2 + 2*SocketDepth(2*R1) - ElbowRadius(2*R1);
        pipe7_origin[1] - CrossLength(2*R1)/2;
        pipe7_origin[2]
    ], R1)
    Rotate8 ← rotate_3d([
        pipe7_origin[0] + CrossLength(2*R1)/2 + 2*SocketDepth(2*R1);
        pipe7_origin[1] - CrossLength(2*R1)/2;
        pipe7_origin[2]
    ], [
        pipe7_origin[0] + CrossLength(2*R1)/2 + 2*SocketDepth(2*R1);
        pipe7_origin[1] - CrossLength(2*R1)/2;
        pipe7_origin[2]
    ], "z", -90)
    Rotate9 ← rotate_3d([
        pipe7_origin[0] + CrossLength(2*R1)/2 + 2*SocketDepth(2*R1);
        pipe7_origin[1] - CrossLength(2*R1)/2;
        pipe7_origin[2]
    ], [
        pipe7_origin[0] + CrossLength(2*R1)/2 + 2*SocketDepth(2*R1);
        pipe7_origin[1] - CrossLength(2*R1)/2;
        pipe7_origin[2]
    ], "x", 90)
    elbow3 ← copyF([
        pipe7_origin[0] + CrossLength(2*R1)/2 + 2*SocketDepth(2*R1);
        pipe7_origin[1] - CrossLength(2*R1)/2;
        pipe7_origin[2]
    ], [
        pipe7_origin[0] + CrossLength(2*R1)/2 + 2*SocketDepth(2*R1);
        pipe7_origin[1] - CrossLength(2*R1)/2;
        pipe7_origin[2]
    ], [0; CrossLength(2*R1)/2 + ShortTeeLength(2*R1) + 2*SocketDepth(2*R1); 0])
    elbow_45 ← mirrorC([
        pipe7_origin[0] + CrossLength(2*R1)/2 + 2*SocketDepth(2*R1);
        pipe7_origin[1] - CrossLength(2*R1)/2;
        pipe7_origin[2]
    ], [
        pipe7_origin[0] + CrossLength(2*R1)/2 + 2*SocketDepth(2*R1);
        pipe7_origin[1] + ShortTeeLength(2*R1) + 2*SocketDepth(2*R1);
        pipe7_origin[2]
    ], [pipe7_origin[0]; pipe7_origin[1]], [pipe7_origin[0]; pipe7_origin[1] + CrossLength(2*R1)])
    layer8 ← layer_set("0")
    layer9 ← layer_freeze("grit-elbow2")
    layer10 ← layer_new("grit-tee1", blue2)
    Tee1 ← Tee(pipe4_origin, R1)
    move ← move([pipe4_origin[0] + R1; pipe4_origin[1]; pipe4_origin[2]], pipe4_origin, [0; 0; -TeeLength(2*R1)])
    Rotate10 ← rotate_3d([pipe4_origin[0] + R1; pipe4_origin[1]; pipe4_origin[2]], pipe4_origin, "z", 90)
    layer22 ← layer_freeze("grit-tee1")
    layer23 ← layer_new("grit-tee2", blue2)
    Tee2 ← Tee([
        pipe7_origin[0];
        pipe7_origin[1] + ShortTeeLength(2*R1) + 2*SocketDepth(2*R1);
        pipe7_origin[2] - TeeLength(2*R1)/2
    ], R1)
    Rotate11 ← rotate_3d([
        pipe7_origin[0] + R1;
        pipe7_origin[1] + ShortTeeLength(2*R1) + 2*SocketDepth(2*R1);
        pipe7_origin[2] - TeeLength(2*R1)/2
    ], [pipe7_origin[0]; pipe7_origin[1] + ShortTeeLength(2*R1) + 2*SocketDepth(2*R1); pipe7_origin[2]], "y", 90)
    Rotate12 ← rotate_3d([
        pipe7_origin[0] + R1;
        pipe7_origin[1] + ShortTeeLength(2*R1) + 2*SocketDepth(2*R1);
        pipe7_origin[2] - TeeLength(2*R1)/2
    ], [pipe7_origin[0]; pipe7_origin[1] + ShortTeeLength(2*R1) + 2*SocketDepth(2*R1); pipe7_origin[2]], "x", -90)
    layer11 ← layer_new("grit-tank", grey)
    Tank ← Tank(tank_origin, tank_dim, thick_tank)
    layer12 ← layer_set("0")
    layer13 ← layer_freeze("grit-tank")
    layer14 ← layer_freeze("grit-tee2")
    three ← stack(layer1, Pipe1, Rotate1, Pipe2, Pipe3, RotateD, layer30, layer31, layer32, elbow1, Rotate6, Rotate7, elbowA, RotateB, layer33, RotateC, elbowB, RotateE, RotateF, RotateG, layer34, layer35, Pipe4, Pipe5)
    four ← stack(Pipe6, RotateH, Pipe7, RotateI, Pipe8, Pipe9, zoom1, Pipe_10and11, layer16, layer17, Riser1, Riser_234)
    return stack(three, four)
seconddisp := 4 in
firstdisp := 6 in
Grit(origin, tank_dim, Δx, Δy, Δz, thick_tank, thick_platform, R1, R_hole, H_riser, num_holes, firstdisp, seconddisp) := Grit_script([origin[0] - firstdisp - ElbowRadius(2*R1); origin[1]; origin[2] + ElbowRadius(2*R1)], [
    origin[0] - firstdisp - 2*ElbowRadius(2*R1);
    origin[1];
    origin[2] + Δz - ElbowRadius(2*R1) - SocketDepth(2*R1)
], [
    origin[0] - Δx - 2*thick_tank - tank_dim[0] - ShortTeeLength(2*R1) - SocketDepth(2*R1);
    origin[1] + Δy + thick_tank + tank_dim[1]/2;
    origin[2] + Δz + thick_platform + tank_dim[2]/2 + TeeLength(2*R1)/2
], [
    origin[0] - Δx - 2*thick_tank - tank_dim[0] - ShortTeeLength(2*R1) - SocketDepth(2*R1);
    origin[1] + Δy + thick_tank + tank_dim[1]/2;
    origin[2] + Δz - SocketDepth(2*R1)
], [
    origin[0] - Δx - thick_tank - tank_dim[0];
    origin[1] + Δy + thick_tank + tank_dim[1]/2;
    origin[2] + Δz + platform_thick + tank_dim[2]/2
], [
    origin[0] - Δx - thick_tank - tank_dim[0] + seconddisp + CrossLength(2*R1);
    origin[1] + Δy + thick_tank + tank_dim[1]/2;
    origin[2] + Δz + platform_thick + tank_dim[2]/2
], [origin[0] - Δx - thick_tank; origin[1] + Δy + thick_tank; origin[2] + Δz + thick_platform], origin, tank_dim, Δx, Δy, Δz, thick_tank, thick_platform, R1, R_hole, H_riser, num_holes, firstdisp, seconddisp)
Drawing_grit := Grit(grit_origin, grit_dim, walkway_width, Δy_grit, Δz_grit, grit_thick, platform_thick, gritpipe_inr, grit_rad, gritriser_h, grit_holes, firstdisp, seconddisp)
# [component: inputs Drawing_grit]
