# Automated Design: AutoCAD: Plant Drawing Inputs
# References
# [reference: MasterProgram.xmcd]
# [reference: PipeDatabase.xmcd]
# [reference: DesignAssumptions.xmcd]
# Colors
grey := [132; 132; 132]
ltgrey := [214; 214; 214]
dkgrey := [91; 91; 91]
blue := [0; 255; 255]
blue2 := [0; 191; 255]
blue3 := [0; 127; 255]
green := [0; 255; 0]
purple := [127; 0; 255]
ltpurple := [125; 0; 160]
zc := .1 m
zc_point := [0; .1; 0]*m
acad_version := 2007
# Sedimentation Tank
tank_origin := [0; 0; 0]*m
tank_dim := sedtank_dim*m
channel_dim := Channel_dim  # This may change
waterlevel := water_depth*m
manifold_depth := manifold_depth*m
num_tanks := n_sedtanks
pipe9_length := .25 ft
offfloor_length := 1 ft
# We don't have values for pipe9.length, offfloor.length
#
# What is the distance between sedpipe.inr, manifold.inr, and waste.inr?
sedpipe_inr := 2/12*ft
manifoldorifice_rad := D_laundOrf/2*m
manifoldorifice_dist := lanudOrf_dist*m
manifold_inr := D_launder/2*m
wasteorifice_rad := D_sludgeOrf/2*m
wasteorifice_dist := sludgeOrf_dist*m
waste_inr := waste_inr*m
offfloorlamina_dist := zc + outerradius(2*sedpipe_inr) + pipe9_length + offfloor_length
# I think this may be calculated in the sedimentation file. I wonder if it is
# calculated the same way, or if we should return it to input here
lamina_origin := [
    (tank_origin[0] - tank_dim[0] + channel_dim[1] + channel_thick);
    tank_origin[1];
    (tank_origin[2] + offfloorlamina_dist)
]
lamina_amp := .5 in
lamina_thick := 4 mm
lamina_width := tank_dim[1]
lamina_length := L_lamella
lamina_periods := 8.5
lamina_slope := α = 60 deg
# We only need width, length, and spacing
lamina_num := N_lamella
lamina_col := 1  # this is a constant!
lamina_x := lamella_spacing
lamina_y := 7 cm
z_rotation := 0
rotate_angle := 90
ϕ := beta = 45 deg  # sedtank slope angle
# Flocculation Tank
floc_dim := floc_dim*m
wall_dim := [floc_dim[0]; tank_thick; floc_dim[2]]
floc_inleth := floc_inleth*m
baffletank1_origin := [
    tank_origin[0] - tank_dim[0];
    tank_origin[1] + 3*(tank_dim[1] + tank_thick) + (floc_dim[1] + wall_dim[1])/2;
    tank_origin[2]
]
baffletank2_origin := [tank_origin[0] - tank_dim[0]; tank_origin[1] + 3*(tank_dim[1] + tank_thick); tank_origin[2]]
baffletank2_location := baffleposition[:, 1][0]
baffletank1_location := baffleposition[:, 0][0]
baffletank2_num := rows(baffletank2_location)
baffletank1_num := rows(baffletank1_location)
# need width and length
baffle_amp := .5 in
baffle_thick := 4 mm
baffle_slope := 90 deg
baffle_width := (floc_dim[1] - wall_dim[1])/2
baffle_col := 1  # this is a constant!
baffle_periods := 8.5
baffle_y := 7 cm
baffle_num := 1
baffle_x := 4 in
# Plant Level Tank
# 3 pipes into plt | big pipe out of plt
lvlpipe_inr := 2/12*ft
effluent_inr := 6 in
sedeff_origin := [
    tank_origin[0] - tank_dim[0] - tank_thick;
    tank_origin[1] + 2.5*tank_dim[1] + 2*tank_thick;
    tank_origin[2] + tank_dim[2] - channel_dim[2] - channel_thick - (2*ElbowRadius(2*effluent_inr))
]
lvltank_dim := [5; 3; 3]*ft
lvltank_waterlvl := HW_plantleveling
wall_disp := 3/12*ft + outerradius(2*effluent_inr)
Δz_effluent := 2*ElbowRadius(2*manifold_inr) + channel_thick
# Platform
column_dim := [2 ft; 2 ft; tank_dim[2] + tank_thick - channel_dim[2] - channel_thick]
# Grit Tank
grit_origin := [
    tank_origin[0] - tank_dim[0] - tank_thick;
    tank_origin[1] + (num_tanks*tank_dim[1]) + (num_tanks*tank_thick) + 3*floc_dim[1]/4;
    tank_origin[2] + floc_inleth
]
grit_dim := grit_dim
grit_holes := 7
Δy_grit := floc_dim[1]/4 + tank_thick + walkway_width - grit_dim[1] - 2*grit_thick
gritriser_h := 30/12*ft
grit_rad := .25 in
Δz_grit := tank_dim[2] - channel_dim[2] - platform_thick - grit_thick
gritpipe_inr := 2/12*ft
# Chemical Stock Platform
stockplat_dim2 := [4*r_drum + 3*drum_disp; 2*r_drum + 2*drum_disp; stockplat_thick]
stockplat_dim1 := [
    4*r_drum + 3*drum_disp + lvltank_dim[0] + 2*lvltank_thick - grit_dim[0] - 2*grit_thick;
    2*r_drum + 2*drum_disp;
    stockplat_thick
]
stockplat1_origin := [
    tank_origin[0] - tank_dim[0] - tank_thick - walkway_width - grit_dim[0] - 2*grit_thick;
    tank_origin[1] + num_tanks*tank_dim[1] + (num_tanks + 1)*tank_thick + floc_dim[1] + walkway_width;
    tank_origin[2] + tank_dim[2] - channel_dim[2] + stockplatcol_dim[2]
]
stockplat2_origin := [
    tank_origin[0] - tank_dim[0] - tank_thick - walkway_width - lvltank_dim[0] - 2*lvltank_thick;
    tank_origin[1] + num_tanks*tank_dim[1] + (num_tanks + 1)*tank_thick + floc_dim[1] - grit_dim[1] - 2*grit_thick;
    tank_origin[2] + tank_dim[2] - channel_dim[2] + stockplatcol_dim[2]
]
