# Automated Design: AutoCAD: Plant Drawing Inputs
# References
# [reference: MasterProgram.xmcd]
# [reference: PipeDatabase.xmcd]
# Colors
grey := [132; 132; 132]
ltgrey := [214; 214; 214]
dkgrey := [91; 91; 91]
blue := [0; 255; 255]
blue2 := [0; 191; 255]
blue3 := [0; 127; 255]
green := [0; 255; 0]
purple := [127; 0; 255]
ltpurple := [125; 0; 160]
zc := .1 m
zc_point := [0; .1; 0]*m
acad_version := 2007
# Sedimentation Tank
tank_origin := [0; 0; 0]*m
tank_dim := [4 m; SedTank_width; 2 m]
channel_dim := [tank_dim[1] + 2*tank_thick; .75 ft; 1 ft]
channel_origin := [
    tank_origin[0] - tank_dim[0] + channel_dim[1];
    tank_origin[1] - tank_thick;
    tank_origin[2] + tank_dim[2] - channel_dim[2]
]
waterlevel := .5 ft
manifold_depth := .5 ft
num_tanks := 3
sedtankpipe9_length := .25 ft
offfloor_length := 1 ft
sedpipe_inr := 2/12*ft
manifoldorifice_rad := .5/12*ft
manifoldorifice_dist := 4/12*ft
manifold_inr := 2/12*ft
wasteorifice_rad := .5/12*ft
wasteorifice_dist := 4/12*ft
waste_inr := 3 in
offfloorlamina_dist := zc + outerradius(2*sedpipe_inr) + sedtankpipe9_length + offfloor_length
lamina_origin := [
    (tank_origin[0] - tank_dim[0] + channel_dim[1] + channel_thick);
    tank_origin[1];
    (tank_origin[2] + offfloorlamina_dist)
]
lamina_amp := .5 in
lamina_thick := 4 mm
lamina_width := tank_dim[1]
lamina_length := L_lamella
lamina_periods := 8.5
lamina_slope := 60 deg
lamina_num := 51
lamina_col := 1  # this is a constant!
lamina_x := lamella_spacing
lamina_y := 7 cm
z_rotation := 0
rotate_angle := 90
ϕ := 45 deg  # sedtank slope angle
# Pipe origins
sedtankpipe1_origin := [
    tank_origin[0] - tank_dim[0] + channel_dim[1]/2;
    tank_origin[1] + tank_dim[1]/2 + outerradius(2*manifold_inr) + 3*(tank_dim[1]/2 - outerradius(2*manifold_inr))/4;
    tank_origin[2] + tank_dim[2] - channel_dim[2]
]
sedtankpipe2_origin := [
    tank_origin[0] - tank_dim[0] + channel_dim[1]/2;
    tank_origin[1] + tank_dim[1]/2 + outerradius(2*manifold_inr) + 1*(tank_dim[1]/2 - outerradius(2*manifold_inr))/4;
    tank_origin[2] + tank_dim[2] - channel_dim[2]
]
sedtankpipe3_origin := [
    tank_origin[0] - tank_dim[0] + channel_dim[1]/2;
    tank_origin[1] + tank_dim[1]/2 - outerradius(2*manifold_inr) - 1*(tank_dim[1]/2 - outerradius(2*manifold_inr))/4;
    tank_origin[2] + tank_dim[2] - channel_dim[2]
]
sedtankpipe4_origin := [
    tank_origin[0] - tank_dim[0] + channel_dim[1]/2;
    tank_origin[1] + tank_dim[1]/2 - outerradius(2*manifold_inr) - 3*(tank_dim[1]/2 - outerradius(2*manifold_inr))/4;
    tank_origin[2] + tank_dim[2] - channel_dim[2]
]
sedtankpipe5_origin := [
    tank_origin[0] - tank_dim[0] + channel_dim[1]/2 + ElbowRadius(2*sedpipe_inr);
    tank_origin[1] + tank_dim[1]/2 + outerradius(2*manifold_inr) + 3*(tank_dim[1]/2 - outerradius(2*manifold_inr))/4;
    tank_origin[2] + sedtankpipe9_length + offfloor_length + ElbowRadius(2*sedpipe_inr)
]
sedtankpipe6_origin := [
    tank_origin[0] - tank_dim[0] + channel_dim[1]/2 + ElbowRadius(2*sedpipe_inr);
    tank_origin[1] + tank_dim[1]/2 + outerradius(2*manifold_inr) + 1*(tank_dim[1]/2 - outerradius(2*manifold_inr))/4;
    tank_origin[2] + sedtankpipe9_length + offfloor_length + ElbowRadius(2*sedpipe_inr)
]
sedtankpipe7_origin := [
    tank_origin[0] - tank_dim[0] + channel_dim[1]/2 + ElbowRadius(2*sedpipe_inr);
    tank_origin[1] + tank_dim[1]/2 - outerradius(2*manifold_inr) - 1*(tank_dim[1]/2 - outerradius(2*manifold_inr))/4;
    tank_origin[2] + sedtankpipe9_length + offfloor_length + ElbowRadius(2*sedpipe_inr)
]
sedtankpipe8_origin := [
    tank_origin[0] - tank_dim[0] + channel_dim[1]/2 + ElbowRadius(2*sedpipe_inr);
    tank_origin[1] + tank_dim[1]/2 - outerradius(2*manifold_inr) - 3*(tank_dim[1]/2 - outerradius(2*manifold_inr))/4;
    tank_origin[2] + sedtankpipe9_length + offfloor_length + ElbowRadius(2*sedpipe_inr)
]
sedtankpipe9_origin := [tank_origin[0] - 7*tank_dim[0]/8; tank_origin[1] + tank_dim[1]/2; tank_origin[2] + offfloor_length]
sedtankpipe10_origin := [tank_origin[0] - 5*tank_dim[0]/8; tank_origin[1] + tank_dim[1]/2; tank_origin[2] + offfloor_length]
sedtankpipe11_origin := [tank_origin[0] - 3*tank_dim[0]/8; tank_origin[1] + tank_dim[1]/2; tank_origin[2] + offfloor_length]
sedtankpipe12_origin := [tank_origin[0] - 1*tank_dim[0]/8; tank_origin[1] + tank_dim[1]/2; tank_origin[2] + offfloor_length]
sedtankpipe13_origin := [
    tank_origin[0] - tank_dim[0] + channel_dim[1] + channel_thick + 2*ElbowRadius(2*sedpipe_inr);
    tank_origin[1] + tank_dim[1]/2;
    tank_origin[2] + tank_dim[2] - waterlevel - manifold_depth - ElbowRadius(2*sedpipe_inr)
]
sedtankpipe14_origin := [
    tank_origin[0] - tank_dim[0];
    tank_origin[1] + tank_dim[1]/2;
    tank_origin[2] + tank_dim[2] - channel_dim[2] - channel_thick - (2*ElbowRadius(2*sedpipe_inr))
]
sedtankbox1_origin := [
    tank_origin[0] - tank_dim[0];
    tank_origin[1] + tank_dim[1]/2 - outerradius(2*waste_inr);
    tank_origin[2] - (2*outerradius(2*waste_inr))
]
sedtankbox1_dim := [tank_dim[0]; 2*outerradius(2*waste_inr); tank_dim[1]/2/tan(ϕ)]
# Pipe Lengths
sedtankpipe1_length := tank_dim[2] - channel_dim[2] - sedtankpipe9_length - offfloor_length - (2*ElbowRadius(2*sedpipe_inr))
sedtankpipe5_length := ((5*tank_dim[0]/8 - channel_dim[1]/2)^2 + (outerradius(2*manifold_inr) + 3*(tank_dim[1]/2 - outerradius(2*manifold_inr))/4)^2)^(1/2) - 3*ElbowRadius(sedpipe_inr)
sedtankpipe6_length := ((tank_dim[0]/8 - channel_dim[1]/2)^2 + (outerradius(2*manifold_inr) + 1*(tank_dim[1]/2 - outerradius(2*manifold_inr))/4)^2)^(1/2) - 3*ElbowRadius(sedpipe_inr)
sedtankpipe7_length := ((3*tank_dim[0]/8 - channel_dim[1]/2)^2 + (outerradius(2*manifold_inr) - 1*(tank_dim[1]/2 - outerradius(2*manifold_inr))/4)^2)^(1/2) - 3*ElbowRadius(sedpipe_inr)
sedtankpipe8_length := ((7*tank_dim[0]/8 - channel_dim[1]/2)^2 + (outerradius(2*manifold_inr) - 3*(tank_dim[1]/2 - outerradius(2*manifold_inr))/4)^2)^(1/2) - 3*ElbowRadius(sedpipe_inr)
sedtankpipe13_length := channel_dim[2] + channel_thick + ElbowRadius(2*sedpipe_inr) - waterlevel - manifold_depth - ElbowRadius(2*sedpipe_inr)
sedtankpipe14_length := channel_dim[1] + channel_thick + ElbowRadius(2*sedpipe_inr)
# Pipe Rotation Angles
sedtankpipe5_angle := -(rad/deg)*atan(((5*tank_dim[0]/8 - channel_dim[1]/2)/((3*(tank_dim[1]/2 - outerradius(2*manifold_inr))/4) + outerradius(2*manifold_inr)))^-1)
sedtankpipe6_angle := -(rad/deg)*((tank_dim[0]/8 - channel_dim[1]/2)/(((tank_dim[1]/2 - outerradius(2*manifold_inr))/4) + outerradius(2*manifold_inr)))^-1
sedtankpipe7_angle := (rad/deg)*atan(((3*tank_dim[0]/8 - channel_dim[1]/2)/(((tank_dim[1]/2 - outerradius(2*manifold_inr))/4) + outerradius(2*manifold_inr)))^-1)
sedtankpipe8_angle := (rad/deg)*atan(((7*tank_dim[0]/8 - channel_dim[1]/2)/((3*(tank_dim[1]/2 - outerradius(2*manifold_inr))/4) + outerradius(2*manifold_inr)))^-1)
# Elbow Origins
sedtankelbow1_origin := [
    tank_origin[0] - tank_dim[0] + channel_dim[1]/2;
    tank_origin[1] + tank_dim[1]/2 + outerradius(2*manifold_inr) + 3*(tank_dim[1]/2 - outerradius(2*manifold_inr))/4 - ElbowRadius(2*sedpipe_inr);
    tank_origin[2] + sedtankpipe9_length + offfloor_length + 2*ElbowRadius(2*sedpipe_inr)
]
sedtankelbow2_origin := [
    tank_origin[0] - tank_dim[0] + channel_dim[1]/2;
    tank_origin[1] + tank_dim[1]/2 + outerradius(2*manifold_inr) + 1*(tank_dim[1]/2 - outerradius(2*manifold_inr))/4 - ElbowRadius(2*sedpipe_inr);
    tank_origin[2] + sedtankpipe9_length + offfloor_length + 2*ElbowRadius(2*sedpipe_inr)
]
sedtankelbow3_origin := [
    tank_origin[0] - tank_dim[0] + channel_dim[1]/2;
    tank_origin[1] + tank_dim[1]/2 - outerradius(2*manifold_inr) - 1*(tank_dim[1]/2 - outerradius(2*manifold_inr))/4 - ElbowRadius(2*sedpipe_inr);
    tank_origin[2] + sedtankpipe9_length + offfloor_length + 2*ElbowRadius(2*sedpipe_inr)
]
sedtankelbow4_origin := [
    tank_origin[0] - tank_dim[0] + channel_dim[1]/2;
    tank_origin[1] + tank_dim[1]/2 - outerradius(2*manifold_inr) - 3*(tank_dim[1]/2 - outerradius(2*manifold_inr))/4 - ElbowRadius(2*sedpipe_inr);
    tank_origin[2] + sedtankpipe9_length + offfloor_length + 2*ElbowRadius(2*sedpipe_inr)
]
sedtankelbow5_origin := [
    tank_origin[0] - 4*tank_dim[0]/5;
    tank_origin[1] + tank_dim[1]/2 + outerradius(2*manifold_inr) + 3*(tank_dim[1]/2 - outerradius(2*manifold_inr))/4 - ElbowRadius(2*sedpipe_inr);
    tank_origin[2] + offfloor_length + sedtankpipe9_length + ElbowRadius(2*sedpipe_inr)
]
sedtankelbow6_origin := [
    tank_origin[0] - 3*tank_dim[0]/5;
    tank_origin[1] + tank_dim[1]/2 + outerradius(2*manifold_inr) + 1*(tank_dim[1]/2 - outerradius(2*manifold_inr))/4 - ElbowRadius(2*sedpipe_inr);
    tank_origin[2] + offfloor_length + sedtankpipe9_length + ElbowRadius(2*sedpipe_inr)
]
sedtankelbow7_origin := [
    tank_origin[0] - 2*tank_dim[0]/5;
    tank_origin[1] + tank_dim[1]/2 - outerradius(2*manifold_inr) - 1*(tank_dim[1]/2 - outerradius(2*manifold_inr))/4 - ElbowRadius(2*sedpipe_inr);
    tank_origin[2] + offfloor_length + sedtankpipe9_length + ElbowRadius(2*sedpipe_inr)
]
sedtankelbow8_origin := [
    tank_origin[0] - 1*tank_dim[0]/5;
    tank_origin[1] + tank_dim[1]/2 - outerradius(2*manifold_inr) - 3*(tank_dim[1]/2 - outerradius(2*manifold_inr))/4 - ElbowRadius(2*sedpipe_inr);
    tank_origin[2] + offfloor_length + sedtankpipe9_length + ElbowRadius(2*sedpipe_inr)
]
sedtankelbow9_origin := [
    tank_origin[0] - tank_dim[0] + channel_dim[1] + channel_thick + 2*ElbowRadius(2*manifold_inr);
    tank_origin[1] + tank_dim[1]/2 - ElbowRadius(2*manifold_inr);
    tank_origin[2] + tank_dim[2] - waterlevel - manifold_depth - ElbowRadius(2*manifold_inr)
]
sedtankelbow10_origin := [
    tank_origin[0] - tank_dim[0] + channel_dim[1] + channel_thick + ElbowRadius(2*manifold_inr);
    tank_origin[1] + tank_dim[1]/2 - ElbowRadius(2*manifold_inr);
    tank_origin[2] + tank_dim[2] - channel_dim[2] - channel_thick - 2*ElbowRadius(2*manifold_inr)
]
# Flocculation Tank
floc_dim := [tank_dim[0]; 2.5 m; tank_dim[2]]
wall_dim := [3/4*floc_dim[0]; tank_thick; floc_dim[2]]
floc_inleth := 6/12*ft
baffletank1_origin := [
    tank_origin[0] - tank_dim[0];
    tank_origin[1] + 3*(tank_dim[1] + tank_thick) + (floc_dim[1] + wall_dim[1])/2;
    tank_origin[2]
]
baffletank2_origin := [tank_origin[0] - tank_dim[0]; tank_origin[1] + 3*(tank_dim[1] + tank_thick); tank_origin[2]]
baffletank2_location := [
    1 ft, 3 ft, 1.25 m;
    3 ft, 0, 1.25 m;
    5 ft, 3.5 ft, 1.25 m;
    7 ft, 0, 1.25 m;
    9 ft, 4 ft, 1.25 m;
    11 ft, 0, 1.25 m
]
baffletank1_location := [
    1 ft, 0, 1.25 m;
    2 ft, 1 ft, 1.25 m;
    3 ft, 0, 1.25 m;
    4 ft, 1 ft, 1.25 m;
    5 ft, 0, 1.25 m;
    6 ft, 2 ft, 1.25 m;
    7 ft, 0, 1.25 m;
    8 ft, 2 ft, 1.25 m;
    9 ft, 0, 1.25 m;
    10 ft, 2.5 ft, 1.25 m;
    11 ft, 0, 1.25 m;
    12 ft, 2.5 ft, 1.25 m;
    13 ft, 0, 1.25 m
]
baffletank2_num := rows(baffletank2_location)
baffletank1_num := rows(baffletank1_location)
baffle_amp := .5 in
baffle_thick := 4 mm
baffle_slope := 90 deg
baffle_width := tank_dim[1]
baffle_col := 1  # this is a constant!
baffle_periods := 8.5
baffle_y := 7 cm
baffle_num := 1
baffle_x := 4 in
# Plant Level Tank
lvlpipe_inr := 2/12*ft
effluent_inr := 6 in
sedeff_origin := [
    tank_origin[0] - tank_dim[0] - tank_thick;
    tank_origin[1] + 2.5*tank_dim[1] + 2*tank_thick;
    tank_origin[2] + tank_dim[2] - channel_dim[2] - channel_thick - (2*ElbowRadius(2*effluent_inr))
]
lvltank_dim := [5; 3; 3]*ft
lvltank_waterlvl := 1.5 ft
wall_disp := 3/12*ft + outerradius(2*effluent_inr)
Δz_effluent := 2*ElbowRadius(2*manifold_inr) + channel_thick
# Platform
column_dim := [2 ft; 2 ft; tank_dim[2] + tank_thick - channel_dim[2] - channel_thick]
# Grit Tank
grit_origin := [
    tank_origin[0] - tank_dim[0] - tank_thick;
    tank_origin[1] + (num_tanks*tank_dim[1]) + (num_tanks*tank_thick) + 3*floc_dim[1]/4;
    tank_origin[2] + floc_inleth
]
grit_dim := [4; 4; 3]*ft
grit_holes := 7
Δy_grit := floc_dim[1]/4 + tank_thick + walkway_width - grit_dim[1] - 2*grit_thick
gritriser_h := 30/12*ft
grit_rad := .25 in
Δz_grit := tank_dim[2] - channel_dim[2] - platform_thick - grit_thick
gritpipe_inr := 2/12*ft
# Chemical Stock Platform
stockplat_dim2 := [4*r_drum + 3*drum_disp; 2*r_drum + 2*drum_disp; stockplat_thick]
stockplat_dim1 := [
    4*r_drum + 3*drum_disp + lvltank_dim[0] + 2*lvltank_thick - grit_dim[0] - 2*grit_thick;
    2*r_drum + 2*drum_disp;
    stockplat_thick
]
stockplat1_origin := [
    tank_origin[0] - tank_dim[0] - tank_thick - walkway_width - grit_dim[0] - 2*grit_thick;
    tank_origin[1] + num_tanks*tank_dim[1] + (num_tanks + 1)*tank_thick + floc_dim[1] + walkway_width;
    tank_origin[2] + tank_dim[2] - channel_dim[2] + stockplatcol_dim[2]
]
stockplat2_origin := [
    tank_origin[0] - tank_dim[0] - tank_thick - walkway_width - lvltank_dim[0] - 2*lvltank_thick;
    tank_origin[1] + num_tanks*tank_dim[1] + (num_tanks + 1)*tank_thick + floc_dim[1] - grit_dim[1] - 2*grit_thick;
    tank_origin[2] + tank_dim[2] - channel_dim[2] + stockplatcol_dim[2]
]
