grey := [132; 132; 132]
ltgrey := [214; 214; 214]
dkgrey := [91; 91; 91]
blue := [0; 255; 255]
blue2 := [0; 191; 255]
blue3 := [0; 127; 255]
green := [0; 255; 0]
tank_origin := [0; 0; 0]
tank_dim := [20; 5; 10]
tank_thick := 1
channel_thick := .5
acad_version := 2004
channel_dim := [tank_dim[1] + (2*tank_thick); 1.5; 2]
waterlevel := .5
manifold_depth := .5
num_tanks := 3
num_baffles := 40
num_bafflecols := 1
pipe_inr := 2/12
rad_curve := 5/12
manifold_inr := 2/12
rad_orifice := .5/12
waste_inr := 2.75/12
effluent_inr := 3/12
pipe_outr := 2.5/12
rad_con := pipe_outr + (.5/12)
manifold_outr := 2.5/12
orifice_dist := 4/12
waste_outr := 3/12
effluent_outr := 3.5/12
elbow_h := 1.5/12
pipe9_length := 1
offfloor_length := 1
floc_dim := [20; 8; 10]
wall_dim := [3/4*floc_dim[0]; tank_thick; floc_dim[2]]
floc_inleth := 6/12
sedeff_origin := [
    tank_origin[0] - tank_dim[0] - tank_thick;
    tank_origin[1] + 2.5*tank_dim[1] + 2*tank_thick;
    tank_origin[2] + tank_dim[2] - channel_dim[2] - channel_thick - (2*rad_curve)
]
lvltank_dim := [5; 3; 3]
lvltank_thick := .5
lvltank_waterlvl := 1.5
wall_disp := 3/12 + pipe_outr
walkway_width := 5
platform_thick := 2
Δz := 2*rad_curve
column_dim := [2; 2; tank_dim[2] + tank_thick - channel_dim[2] - channel_thick]
grit_origin := [
    tank_origin[0] - tank_dim[0] - tank_thick;
    tank_origin[1] + (num_tanks*tank_dim[1]) + (num_tanks*tank_thick) + 3*floc_dim[1]/4;
    tank_origin[2] + floc_inleth
]
grit_dim := [4; 4; 3]
grit_thick := .5
grit_holes := 7
gritriser_h := 30/12
Δy_grit := floc_dim[1]/4 + tank_thick + walkway_width - grit_dim[1] - 2*grit_thick
r_drum := 1.5
drum_disp := 8/12
h_drum := 3
Δz_grit := tank_dim[2] - channel_dim[2] - channel_thick - floc_inleth
Tee_length := 15/12
Tee_lengths := Tee_length/2
Cross_length := 15/12
stockplatcol_dim := [6/12; 6/12; 3]
stockplat_thick := 1
stockplat_dim2 := [4*r_drum + 3*drum_disp; 2*r_drum + 2*drum_disp; stockplat_thick]
stockplat_dim1 := [
    4*r_drum + 3*drum_disp + lvltank_dim[0] + 2*lvltank_thick - grit_dim[0] - 2*grit_thick;
    2*r_drum + 2*drum_disp;
    stockplat_thick
]
stockplat1_origin := [
    tank_origin[0] - tank_dim[0] - tank_thick - walkway_width - grit_dim[0] - 2*grit_thick;
    tank_origin[1] + num_tanks*tank_dim[1] + (num_tanks + 1)*tank_thick + floc_dim[1] + walkway_width;
    tank_origin[2] + tank_dim[2] - channel_dim[2] - channel_thick + platform_thick + stockplatcol_dim[2]
]
stockplat2_origin := [
    tank_origin[0] - tank_dim[0] - tank_thick - walkway_width - lvltank_dim[0] - 2*lvltank_thick;
    tank_origin[1] + num_tanks*tank_dim[1] + (num_tanks + 1)*tank_thick + floc_dim[1] - grit_dim[1] - 2*grit_thick;
    tank_origin[2] + tank_dim[2] - channel_dim[2] - channel_thick + platform_thick + stockplatcol_dim[2]
]
factor_safety := .5
offfloorlamina_dist := factor_safety + pipe_outr + pipe9_length + offfloor_length
lamina_origin := [
    (tank_origin[0] - tank_dim[0] + channel_dim[1] + channel_thick);
    tank_origin[1];
    (tank_origin[2] + offfloorlamina_dist)
]
tnk_length := 5
slope_height := 2.5  # This to be set from inputs?
ϕ := 60 deg
slope_param := slope_height/tan(ϕ)
