# [reference: basics.xmcd]
Pipescript_nz(p1, p2, p3, R1, R2, L) :=
    cylinder1 ← cylinderA(p1, R1, L)
    cylinder2 ← cylinderA(p1, R2, L)
    subtract1 ← subtractD(p2, p3)
    return concat(cylinder1, cylinder2, subtract1)
Pipe_nz(o, R1, R2, L) := Pipescript_nz([o[0]; o[1]; o[2]], [o[0] + R1; o[1]; o[2]], [o[0] + R2; o[1]; o[2]], R1, R2, L)
# p1 | p2 | p3
Drawing_Pipe := Pipe_nz([1; 2; 3], 2, 1.5, 15)  # error: This value has units: Unitless, but must have units: Length.
# [component: inputs Drawing_Pipe]
