Crossscript1(p1, p2, p3, p4, p5, p6, p7, p8, p9, p10, p11, p12, p13, p14, p15, p16, p17, p18, p19, p20, p21, p22, p23, p24, R1, R2, R3, L, H, win1, win2) :=
    viewtop ← viewtop
    zoom_win ← zoom_wina(win1, win2)
    cylinder1 ← cylinderA(p1, R1, L)
    cylinder2 ← cylinderB(p2, R1, p3)
    union1 ← unionA(p4, p5)
    cylinder3 ← cylinderA(p1, R2, L)
    cylinder4 ← cylinderB(p2, R2, p3)
    subtract1 ← subtractA(p4, p1)
    subtract2 ← subtractA(p4, p6)
    cylinder5 ← cylinderC(p1, R3, -H)
    cylinder6 ← cylinderA(p1, R1, -H)
    subtract3 ← subtractA(p7, p8)
    viewfront ← viewfront
    mirror1 ← mirrorA(p9, p10, p11)
    mirror2 ← mirrorA(p9, p10, p12)
    bigunion1 ← bigunion(p13, p14, p15, p16)
    mirror3 ← mirrorA(p17, p18, p19)
    cylinder7 ← cylinderB(p20, R2, p21)
    subtract4 ← subtractB(p22, p23, p24)
    viewfront2 ← concat("_-view", sp, "o", sp, "f")
    one ← concat(viewtop, zoom_win, cylinder1, cylinder2, zoomA)
    two ← concat(union1, cylinder3, cylinder4, zoomA)
    three ← concat(subtract1, subtract2, cylinder5)
    four ← concat(cylinder6, subtract3, viewfront1)
    five ← concat(mirror1, mirror2, zoomA)
    six ← concat(bigunion1, zoom, mirror3, viewtop1)
    seven ← concat(cylinder7, subtract4, viewfront1)
    return stack(one, two, three, four, five, six, seven)  # error: This variable is undefined.
Crossscript2(p25, p26, p27, p28, p29, p30) :=
    mirror4 ← mirrorA(p25, p26, p27)
    bigunion2 ← union_all
    one ← concat(mirror4, bigunion2, viewtop1)
    return one  # error: This variable is undefined.
# p1 | p2 | p3 | p4 | p5 | p6 | p7 | p8 | p9 | p10 | p11 | p12 | p13 | p14 | p15 | p16 | p17 | p18 | p19 | p20 | p21 | p22 | p25
Cross1(origin, R1, R2, R3, L, H) := Crossscript1([origin[0]; origin[1]; origin[2]], [origin[0]; origin[1]; origin[2] + L/2], [origin[0] + L/2; origin[1]; origin[2] + L/2], [origin[0] - R1; origin[1]; origin[2]], [origin[0] + L/2; origin[1] + R1; origin[2] + L/2], [origin[0] - R2; origin[1]; origin[2]], [origin[0] - R3; origin[1]; origin[2]], [origin[0] - R1; origin[1]; origin[2] - H], [origin[0]; origin[2] - H; -origin[1] - R3], [origin[0]; origin[2] + L/2], [origin[0] + zc; origin[2] + L/2 - zc], [origin[0] + zc; origin[2] + L/2], [origin[0]; origin[2] + L + H; -origin[1]], [origin[0] + L/2 + H; origin[2] + L/2; -origin[1]], [origin[0]; origin[2] - H; -origin[1]], [origin[0]; origin[2] + R2; -origin[1]], [origin[0]; origin[2] + R2; origin[1]], [origin[0]; origin[2]], [origin[0]; origin[2] + zc], [origin[0] - L/2; origin[1]; origin[2] + L/2], [origin[0] + L/2; origin[1]; origin[2] + L/2], [origin[0] - L/4; origin[1] - R1; origin[2]], [origin[0] + L/4; origin[1] - R1; origin[2]], [origin[0]; origin[1]; origin[2] + L/2 - R3], R1, R2, R3, L, H, [origin[0] - (L/2 + H); origin[1] - R3; origin[2]], [origin[0] + (L/2 + H); origin[1] + R3; origin[2]])  # error: This variable is undefined.
# p23 | p24
Cross2(origin, R1, R2, R3, L, H) := Crossscript2([origin[0] + L/2 + H; origin[2] + L/2; -origin[1] + R3], [origin[0]; origin[2]; -origin[1]], [origin[0]; origin[2] + L], [origin[0] + L/2 + H; origin[2] + L/2; -origin[1]], [origin[0]; origin[2] + L + H; origin[1]], [origin[0] - L/2 - H; origin[2] + L/2; -origin[1]])  # error: This variable is undefined.
Cross(origin, pipe_inr) := stack(Cross1(origin, outerradius(2*pipe_inr), pipe_inr, ConRadius(2*pipe_inr), ShortTeeLength(2*pipe_inr)*2, SocketDepth(2*pipe_inr)), Cross2(origin, outerradius(2*pipe_inr), pipe_inr, outerradius(2*pipe_inr)*1.2, ShortTeeLength(2*pipe_inr)*2, SocketDepth(2*pipe_inr)))  # error: This variable is undefined.
