# [reference: basics - Copy.xmcd]
# [reference: chemicalstock - Copy.xmcd]
# Automated Design: AutoCAD: Platform
# Platform Inputs
# Origins Points
# Platform Scripts
Platformscript1(grey, platform1_origin, platform2_origin, column1_origin, column2grit_origin, column2lvl_origin, column3grit_origin, column3lvl_origin, platform1_dim, platform2grit_dim, platform2lvl_dim, column_dim) :=
    layer1 ← layer_new("platform", grey)
    if |platform2grit_dim[0]| > |platform2lvl_dim[0]|
        box1 ← box(platform1_origin, [
            platform1_origin[0] + platform1_dim[0];
            platform1_origin[1] + platform1_dim[1];
            platform1_origin[2] + platform1_dim[2]
        ])
        box2 ← box(platform2_origin, [
            platform2_origin[0] + platform2grit_dim[0];
            platform2_origin[1] + platform2grit_dim[1];
            platform2_origin[2] + platform2grit_dim[2]
        ])
        box3 ← box(column1_origin, [
            column1_origin[0] - column_dim[0];
            column1_origin[1] - column_dim[1];
            column1_origin[2] - column_dim[2]
        ])
        box4 ← box(column2grit_origin, [
            column2grit_origin[0] - column_dim[0];
            column2grit_origin[1] - column_dim[1];
            column2grit_origin[2] - column_dim[2]
        ])
        box5 ← box(column3grit_origin, [
            column3grit_origin[0] - column_dim[0];
            column3grit_origin[1] - column_dim[1];
            column3grit_origin[2] - column_dim[2]
        ])
    otherwise
        box1 ← box(platform1_origin, [
            platform1_origin[0] + platform1_dim[0];
            platform1_origin[1] + platform1_dim[1];
            platform1_origin[2] + platform1_dim[2]
        ])
        box2 ← box(platform2_origin, [
            platform2_origin[0] + platform2lvl_dim[0];
            platform2_origin[1] + platform2lvl_dim[1];
            platform2_origin[2] + platform2lvl_dim[2]
        ])
        box3 ← box(column1_origin, [
            column1_origin[0] - column_dim[0];
            column1_origin[1] - column_dim[1];
            column1_origin[2] - column_dim[2]
        ])
        box4 ← box(column2lvl_origin, [
            column2lvl_origin[0] - column_dim[0];
            column2lvl_origin[1] - column_dim[1];
            column2lvl_origin[2] - column_dim[2]
        ])
        box5 ← box(column3lvl_origin, [
            column3lvl_origin[0] - column_dim[0];
            column3lvl_origin[1] - column_dim[1];
            column3lvl_origin[2] - column_dim[2]
        ])
    union1 ← union_allA
    layerset ← layer_set("0")
    layerfreeze1 ← layer_freeze("platform")
    stock1 ← Stock(grey, stockplat1_origin, stockplat_dim, stockplatcol_dim, r_drum, h_drum, walkway_width)
    stock2 ← Stock(grey, stockplat2_origin, stockplat_dim, stockplatcol_dim, r_drum, h_drum, walkway_width)
    one ← stack(layer1, box1, box2, box3, box4, box5, union1, layerset, layerfreeze1)
    return ← one  # error: This variable is undefined.
Platform(grey, tank_origin, tank_dim, floc_dim, channel_dim, column_dim, lvltank_dim, tank_thick, channel_thick, lvltank_thick, platform_thick, walkway_width, num_tanks, r_drum, drum_disp) := Platformscript1(grey, [
    tank_origin[0] + tank_thick;
    tank_origin[1] + (num_tanks*tank_dim[1]) + ((num_tanks + 2)*tank_thick) + 2*floc_dim[1];
    tank_origin[2] + tank_dim[2] - channel_dim[2] - platform_thick
], [
    tank_origin[0] - tank_dim[0] - tank_thick;
    tank_origin[1] - tank_thick;
    tank_origin[2] + tank_dim[2] - channel_dim[2] - platform_thick
], [
    tank_origin[0] + tank_thick;
    tank_origin[1] + (num_tanks*tank_dim[1]) + ((num_tanks + 2)*tank_thick) + 2*floc_dim[1] + walkway_width;
    tank_origin[2] + tank_dim[2] - channel_dim[2] - channel_thick
], [
    tank_origin[0] - tank_dim[0] - tank_thick - walkway_width - grit_dim[0] - 2*grit_thick - ShortTeeLength(gritpipe_inr) - walk_space - 4*r_drum - 3*drum_disp + column_dim[0];
    tank_origin[1] + (num_tanks*tank_dim[1]) + ((num_tanks + 2)*tank_thick) + 2*floc_dim[1] + walkway_width;
    tank_origin[2] + tank_dim[2] - channel_dim[2] - channel_thick
], [
    tank_origin[0] - tank_dim[0] - tank_thick - walkway_width - lvltank_dim[0] - 2*lvltank_thick - 4*r_drum - 3*drum_disp + column_dim[0];
    tank_origin[1] + (num_tanks*tank_dim[1]) + ((num_tanks + 2)*tank_thick) + 2*floc_dim[1] + walkway_width;
    tank_origin[2] + tank_dim[2] - channel_dim[2] - channel_thick
], [
    tank_origin[0] - tank_dim[0] - tank_thick - walkway_width - grit_dim[0] - 2*grit_thick - ShortTeeLength(gritpipe_inr) - walk_space - 4*r_drum - 3*drum_disp + column_dim[0];
    tank_origin[1] - tank_thick + column_dim[1];
    tank_origin[2] + tank_dim[2] - channel_dim[2] - channel_thick
], [
    tank_origin[0] - tank_dim[0] - tank_thick - walkway_width - lvltank_dim[0] - 2*lvltank_thick - 4*r_drum - 3*drum_disp + column_dim[0];
    tank_origin[1] - tank_thick + column_dim[1];
    tank_origin[2] + tank_dim[2] - channel_dim[2] - channel_thick
], [-(tank_dim[0] + 2*tank_thick); walkway_width; platform_thick], [
    -(walkway_width + grit_dim[0] + 2*grit_thick + 4*r_drum + 3*drum_disp + ShortTeeLength(gritpipe_inr) + walk_space);
    (num_tanks*tank_dim[1]) + ((num_tanks + 2)*tank_thick) + 2*floc_dim[1] + walkway_width + tank_thick;
    platform_thick
], [
    -(walkway_width + lvltank_dim[0] + 2*lvltank_thick + 4*r_drum + 3*drum_disp);
    (num_tanks*tank_dim[1]) + ((num_tanks + 2)*tank_thick) + 2*floc_dim[1] + walkway_width + tank_thick;
    platform_thick
], column_dim)  # error: This variable is undefined.
# column2lvl_origin | column3grit_origin | platform2grit_dim
# platform1_origin | platform2_origin | column1_origin | column2grit_origin | column3lvl_origin | platform1_dim | platform2lvl_dim
Platform :=
    Platform ← Platform(grey, tank_origin, tank_dim, floc_dim, channel_dim, column_dim, lvltank_dim, tank_thick, channel_thick, lvltank_thick, platform_thick, walkway_width, num_tanks, r_drum, drum_disp)
    alumstock ← Stock1(grey, alumplat_origin, alumplat_dim, alumplatcol_dim, D_Drum/2, H_Drum)
    chlorinestock ← Stock(grey, chlorineplat_origin, chlorineplat_dim, chlorineplatcol_dim, D_Drum/2, H_Drum)
    return stack(Platform, alumstock, chlorinestock)  # error: This variable is undefined.
# [component: inputs Platform]
