Manifoldscript(p1, p2, p3, p4, p5, p6, p7, p8, R1, R2, R3, L, n1, n2, d1, win1, win2) :=
    viewtop ← viewtop
    zoom_win ← zoom_wina(win1, win2)
    pipe1 ← Pipe_nz(p1, R2, L)
    cylinder3 ← cylinderB(p2, R3, p3)
    viewrightside ← viewrightside
    array1 ← arrayB(p4, n1, n2, -d1)
    mirror1 ← mirrorB(p6, p7, p7, p8)
    subtract2 ← subtractG(p5, p8, p7)
    one ← concat(viewtop, zoom_win, pipe1)
    two ← concat(cylinder3, viewrightside, array1)
    three ← concat(viewtop, mirror1, subtract2)
    return stack(one, two, three)  # error: This variable is undefined.
Manifold1(manifold_origin, manifold_outr, manifold_inr, rad_hole, tank_length, orifice_dist) := Manifoldscript([manifold_origin[0]; manifold_origin[1]; manifold_origin[2]], [manifold_origin[0]; manifold_origin[1]; manifold_origin[2] + tank_length - orifice_dist], [
    manifold_origin[0];
    manifold_origin[1] + manifold_outr + zc;
    manifold_origin[2] + tank_length - orifice_dist
], [
    manifold_origin[1] + manifold_outr + zc;
    manifold_origin[2] + tank_length - orifice_dist;
    manifold_origin[0]
], [manifold_origin[0]; manifold_origin[1] - manifold_outr], [(manifold_origin[0] + manifold_inr/2); (manifold_origin[1] + (manifold_inr/(2*tan(π/3))))], [manifold_origin[0]; manifold_origin[1]], [manifold_origin[0] + zc; manifold_origin[1] + (zc*tan(π/3))], manifold_outr, manifold_inr, rad_hole, tank_length, floor(tank_length/orifice_dist), 1, orifice_dist, [manifold_origin[0] - manifold_outr; manifold_origin[1] - manifold_outr; manifold_origin[2]], [
    manifold_origin[0] + manifold_outr + zc;
    manifold_origin[1] + manifold_outr + zc;
    manifold_origin[2]
])  # error: This variable is undefined.
p8
# p1 | p2 | p3 | p4 | p5
# p6 | p7
Manifold(manifold_origin, manifold_inr, orifice_rad, tank_length, orifice_dist) := Manifold1(manifold_origin, outerradius(2*manifold_inr), manifold_inr, orifice_rad, tank_length, orifice_dist)  # error: This variable is undefined.
Drawing_Manifold := Manifold([1; 2; 3]*m, 2.5 in, .5 in, 15 m, 4 in)  # error: This variable is undefined.
# [component: inputs Drawing_Manifold]
