# [reference: inputs - integrated.xmcd]
# [reference: SedTankwithlamina.xmcd]
# [reference: floctank.xmcd]
# [reference: Sed.eff.xmcd]
# [reference: platform.xmcd]
Plantscript1 :=
    Sedtank ← Sedtank
    Floctank ← Floctank
    layerthaw1 ← layer_thaw("channel")
    layerthaw2 ← layer_thaw("floctank")
    union1 ← concat("_union", sp, "ALL", sp)
    layerfreeze1 ← layer_freeze("floctank")
    one ← stack(layerthaw1, layerthaw2, union1, layerfreeze1)
    return stack(Sedtank, Floctank, one)
Plant1 := Plantscript1
Drawing_Plant1 := Plant1
# [component: inputs Drawing_Plant1]
