Teescript1(p1, p2, p3, p4, p5, p6, p7, p8, p9, p10, p11, p12, p13, p14, p15, p16, p17, p18, p19, p20, p21, p22, p23, p24, R1, R2, R3, L, H, win1, win2, win3, win4) :=
    viewtop ← viewtop
    zoom_win ← zoom_wina(win1, win2)
    zoom_win1 ← zoom_wina(win3, win4)
    cylinder1 ← cylinderA(p1, R1, L)
    cylinder2 ← cylinderD(p2, R1, p3)
    union1 ← unionA(p4, p5)
    cylinder3 ← cylinderA(p1, R2, L)
    cylinder4 ← cylinderD(p2, R2, p3)
    subtract1 ← subtractA(p4, p1)
    subtract2 ← subtractA(p4, p6)
    cylinder5 ← cylinderC(p1, R3, -H)
    cylinder6 ← cylinderA(p1, R1, -H)
    subtract3 ← subtractA(p7, p8)
    viewfront ← viewfront
    mirror1 ← mirrorA(p9, p10, p11)
    mirror2 ← mirror(p9, p10, p12)
    bigunion1 ← bigunion(p13, p14, p15, p16)
    mirror3 ← mirrorA(p17, p18, p19)
    one ← concat(viewtop, zoom_win, cylinder1, cylinder2)
    two ← concat(union1, cylinder3, cylinder4)
    three ← concat(subtract1, subtract2, cylinder5)
    four ← concat(cylinder6, subtract3, viewfront1)
    five ← concat(zoom_win1, mirror1, mirror2)
    six ← concat(bigunion1, viewtop1)
    return stack(one, two, three, four, five, six)  # error: This variable is undefined.
# p1 | p2 | p3 | p4 | p5 | p6 | p7 | p8 | p9 | p10 | p11 | p12 | p13 | p14 | p15 | p16 | p17 | p18 | p20 | p19 | p20 | p21 | p22 | p23 | p24
Tee1(origin, R1, R2, R3, L, H) := Teescript1([origin[0]; origin[1]; origin[2]], [origin[0]; origin[1]; origin[2] + L/2], [origin[0] + L/2; origin[1]; origin[2] + L/2], [origin[0] - R1; origin[1]; origin[2]], [origin[0] + L/2; origin[1] + R1; origin[2] + L/2], [origin[0] - R2; origin[1]; origin[2]], [origin[0] - R3; origin[1]; origin[2]], [origin[0] - R1; origin[1]; origin[2] - H], [origin[0]; origin[2] - H; -origin[1] - R3], [origin[0]; origin[2] + L/2], [origin[0] + zc; origin[2] + L/2 - zc], [origin[0] + zc; origin[2] + L/2], [origin[0]; origin[2] + L + H; -origin[1]], [origin[0] + L/2 + H; origin[2] + L/2; -origin[1]], [origin[0]; origin[2] - H; -origin[1]], [origin[0]; origin[2] + R2; -origin[1]], [origin[0]; origin[2] + R2; origin[1]], [origin[0]; origin[2]], [origin[0]; origin[2] + zc], [origin[0] - L/2; origin[1]; origin[2] + L/2], [origin[0] + L/2; origin[1]; origin[2] + L/2], [origin[0] - L/4; origin[1] - R1; origin[2]], [origin[0] + L/4; origin[1] - R1; origin[2]], [origin[0]; origin[1]; origin[2] + L/2 - R3], R1, R2, R3, L, H, [origin[0] - (L/2 + H); origin[1] - R3; origin[2]], [origin[0] + (L/2 + H); origin[1] + R3; origin[2]], [origin[0] - R3 - zc; origin[2] - H - zc; -origin[1]], [origin[0] + L/2 + H + zc; origin[2] + H + L + zc; -origin[1]])  # error: This variable is undefined.
Tee(origin, pipe_inr) := Tee1(origin, outerradius(2*pipe_inr), pipe_inr, ConRadius(2*pipe_inr), 2*ShortTeeLength(2*pipe_inr), SocketDepth(2*pipe_inr))  # error: This variable is undefined.
Drawing_Tee := Tee([50; -57; 3]*m, 2 in)  # error: This variable is undefined.
# [component: inputs Drawing_Tee]
