# [reference: basics.xmcd]
# [reference: PipeDatabase.xmcd]
Pipescript_nz(p1, p2, p3, R1, R2, L) :=
    cylinder1 ← cylinderA(p1, R1, L)
    cylinder2 ← cylinderA(p1, R2, L)
    subtract1 ← subtractD(p2, p3)
    return concat(cylinder1, cylinder2, subtract1)
Pipe_nz(origin, pipe_inr, L) := Pipescript_nz(origin, [origin[0] + outerradius(2*pipe_inr); origin[1]; origin[2]], [origin[0] + pipe_inr; origin[1]; origin[2]], outerradius(2*pipe_inr), pipe_inr, L)
# p1 | p2 | p3
Drawing_Pipe := Pipe_nz([1; 2; 3]*m, 1.5 in, 15 in)
# [component: inputs Drawing_Pipe]
