EN_PipeSpec := 2
T_PlantWall := 15 cm
L_Et := 1 m
N_FlocChannels := 2
HW_FlocStart := 1.29 m
W_Et := 1 m
W_FlocChannel := .5 m
L_Lfom := .4 m
H_Et := 1 m
W_MpWalkway := 1 m
L_Sed := 3 m
HL_Lfom := 20 cm
T_EtWall := 10 cm
W_Sed := 1 m
H_LfomFreefall := 5 cm
N_SedTanks := 3
HW_EtMin := 20 cm
ND_Lfom := 6 in
HW_EtMax := HW_EtMin + HL_Lfom
# Automated Design: AutoCAD: Entrance Tank
# References
# [reference: basics - Copy.xmcd]
# [reference: tank.xmcd]
# [reference: pipe - Copy.xmcd]
# [reference: PipeDatabase.xmcd]
# Inputs
Plant_Origin := [0; 0; 0]*m
Et_origin :=
    if mod(N_FlocChannels, 2) == 0
        origin ← [
            Plant_Origin[0] - L_Sed - (2*T_PlantWall) - W_MpWalkway;
            Plant_Origin[1] + (N_SedTanks*(W_Sed + T_PlantWall)) + ((N_FlocChannels - 1)*(W_FlocChannel + T_PlantWall));
            Plant_Origin[2] + HW_FlocStart + H_LfomFreefall - HW_EtMin
        ]
    if mod(N_FlocChannels, 2) == 1
        origin ← [
            Plant_Origin[0] + (2*T_PlantWall) + W_MpWalkway + W_Et;
            Plant_Origin[1] + (N_SedTanks*(W_Sed + T_PlantWall)) + ((N_FlocChannels - 1)*(W_FlocChannel + T_PlantWall));
            Plant_Origin[2] + HW_FlocStart + H_LfomFreefall - HW_EtMin
        ]
    return origin
    = [-4.3; 4.1; 1.14] m
Et_dim := [L_Et; W_Et; H_Et]
Lfom_origin := [Et_origin[0] - (L_Et/2); Et_origin[1] + W_Et/2; Et_origin[2]]
Lfomhole_origin := [Lfom_origin[0]; Lfom_origin[1]; Et_origin[2] - T_EtWall]
Lfomhole_subtractpt := [
    Lfomhole_origin[0] - outerradius(ND_Lfom);
    Lfomhole_origin[1] - outerradius(ND_Lfom);
    Lfomhole_origin[2]
]
# Scripts
EtTankScript :=
    layernewt ← layer_new("entrancetank", ltgrey)
    tank ← Tank(Et_origin, Et_dim, T_EtWall)
    layersett ← layer_set("0")
    layerfreezet ← layer_freeze("entrancetank")
    one ← stack(layernewt, tank, layersett, layerfreezet)
    return one
EtPipeHoleScript :=
    layerthawt ← layer_thaw("entrancetank")
    layersett ← layer_set("entrancetank")
    cylinderh ← cylinderC(Lfomhole_origin, outerradius(ND_Lfom), T_EtWall)
    viewtopt ← viewtop1
    subtracth ← subtractH(Et_origin, Lfomhole_origin, Lfomhole_subtractpt)
    layersetp ← layer_set("0")
    layerfreezet ← layer_freeze("entrancetank")
    one ← stack(layerthawt, layersett, cylinderh, viewtopt, subtracth, layersetp, layerfreezet)
    return one
EtPipeScript :=
    layernewp ← layer_new("Lfom", blue)
    Lfom ← Pipe(Lfom_origin, ND_Lfom, L_Lfom, EN_PipeSpec)
    layersetp ← layer_set("0")
    layerfreezep ← layer_freeze("Lfom")
    one ← stack(layernewp, Lfom, layersetp, layerfreezep)
    return one
EntranceTank := stack(EtTankScript, EtPipeHoleScript, EtPipeScript)
# [component: inputs EntranceTank]
