# [reference: SedTank.xmcd]
echanneltank_origin :=
    origin ← [Plant_Origin[0]; Plant_Origin[1] - (4*ConRadius(ND_PltWeir)) - 3*S_Elbow; Plant_Origin[2]] if sedlayout == 2
    if sedlayout == 3
        origin ← [
            Plant_Origin[0] - L_Sed + W_InletChannel + T_ChannelWall + S_Elbow + ElbowRadius(ND_PltWeir) + ConRadius(ND_PltWeir) + SocketDepth(ND_PltWeir);
            Plant_Origin[1] - (4*ConRadius(ND_PltWeir)) - (3*S_Elbow);
            Plant_Origin[2]
        ]
    origin
echanneltank_dim := [
    S_Elbow + ElbowRadius(ND_PltWeir) + ConRadius(ND_PltWeir) + SocketDepth(ND_PltWeir);
    (4*ConRadius(ND_PltWeir)) - (3*S_Elbow);
    H_Sed
]
sedtankelbowweir1_origin :=
    if sedlayout == 2
        origin ← [
            Plant_Origin - ConRadius(ND_PltWeir);
            Plant_Origin - S_Elbow - ConRadius(ND_PltWeir);
            Plant_Origin + ElbowRadius(ND_PltWeir) + ConRadius(ND_PltWeir)
        ]
    if sedlayout == 3
        origin ← [
            Plant_Origin - L_Sed + W_InletChannel + T_ChannelWall + echanneltank_dim[0] - ConRadius(ND_PltWeir);
            Plant_Origin - S_Elbow - ConRadius(ND_PltWeir);
            Plant_Origin + ElbowRadius(ND_PltWeir) + ConRadius(ND_PltWeir)
        ]
    return ← origin
sedechanneltankscript :=
    viewtope ← viewtop1
    layernewect ← layer_new("echanneltank", ltgrey)
    tankect ← tank(echanneltank_origin, echanneltank_dim, T_PlantWall)
    layerset ← layer_set("0")
    layerfreezeect ← layer_freeze("echanneltank")
    layernewe ← layer_new("exitweirelbow", green)
    elbowe ← elbow(sedtankexitweirelbow1_origin, ND_PltWeir, EN_PipeSpec)
    rotatee1 ← rotate_3d([
        sedtankexitweirelbow_origin[0] + ElbowRadius(ND_PltWeir);
        sedtankexitweirelbow_origin[1];
        sedtankexitweirelbow_origin[2] - outerradius(ND_PltWeir)
    ], sedtankexitweirelbow_origin, "y", 90)
    rotatee2 ← rotate_3d([
        sedtankexitweirelbow_origin[0] + ElbowRadius(ND_PltWeir);
        sedtankexitweirelbow_origin[1];
        sedtankexitweirelbow_origin[2] - outerradius(ND_PltWeir)
    ], sedtankexitweirelbow_origin, "y", 90)
    layersete ← layer_set("0")
    layerfreezee ← layer_freeze("exitweirelbow")
    layerneww ← layer_new("exitweir", blue)
    pipew ← Pipe(pltweir_origin, ND_PltWeir, -pltweir_length, EN_PipeSpec)
    layerfreezew ← layer_freeze("exitweir")
    one ← stack(viewtope, layernewect, tankect, layerset, layerfreezeect, layernewe, elbowe, rotatee1, layersete, layerfreezee, layerneww, pipew, layerfreezew)
    return one  # error: This variable is undefined.
