# [reference: basics - Copy.xmcd]
# [reference: pipe - Copy.xmcd]
# [reference: PipeDatabase.xmcd]
Manifoldscript(p1, p2, p3, p4, p5, p6, p7, p8, ND, R1, R2, R3, L, n1, n2, d1, win1, win2, EN) :=
    viewtop ← viewtop
    pipe1 ← Pipe(p1, ND, L, EN)
    zoom_win ← zoom_win(win1, win2)
    cylinder3 ← cylinderB(p2, R3, p3)
    viewrightside ← viewrightside
    array1 ← arrayB(p4, n1, n2, -d1)
    mirror1 ← mirrorB(p6, p7, p7, p8)
    subtract2 ← subtractG(p5, p8, p7)
    one ← concat(viewtop, zoom_win)
    two ← pipe1
    three ← concat(cylinder3, viewrightside, array1)
    four ← concat(viewtop, mirror1, subtract2)
    return stack(one, two, three, four)
Manifold1(manifold_origin, ND_Manifold, manifold_outr, manifold_inr, rad_hole, tank_length, orifice_dist, EN_PipeSpec) := Manifoldscript([manifold_origin[0]; manifold_origin[1]; manifold_origin[2]], [manifold_origin[0]; manifold_origin[1]; manifold_origin[2] + tank_length - orifice_dist], [
    manifold_origin[0];
    manifold_origin[1] + manifold_outr + zc;
    manifold_origin[2] + tank_length - orifice_dist
], [
    manifold_origin[1] + manifold_outr + zc;
    manifold_origin[2] + tank_length - orifice_dist;
    manifold_origin[0]
], [manifold_origin[0]; manifold_origin[1] - manifold_outr], [(manifold_origin[0] + manifold_inr/2); (manifold_origin[1] + (manifold_inr/(2*tan(π/3))))], [manifold_origin[0]; manifold_origin[1]], [manifold_origin[0] + (.45*manifold_inr); manifold_origin[1] + ((.45*manifold_inr)*tan(π/3))], ND_Manifold, manifold_outr, manifold_inr, rad_hole, tank_length, floor(tank_length/orifice_dist), 1, orifice_dist, [manifold_origin[0] - manifold_outr; manifold_origin[1] - manifold_outr; manifold_origin[2]], [
    manifold_origin[0] + manifold_outr + zc;
    manifold_origin[1] + manifold_outr + zc;
    manifold_origin[2]
], EN_PipeSpec)
# p1 | p2 | p3 | p4 | p5 | p6 | p7 | p8
Manifold(manifold_origin, ND_Manifold, orifice_rad, tank_length, orifice_dist, EN_PipeSpec) := Manifold1(manifold_origin, ND_Manifold, outerradius(ND_Manifold), innerD(ND_Manifold, EN_PipeSpec)/2, orifice_rad, tank_length, orifice_dist, EN_PipeSpec)
# [component: inputs Manifold([0; 0; 0]*m, 2 in, .15 in, 1 m, 6 in, 4)]
