# [reference: MasterProgram.xmcd]
# [reference: basics - Copy.xmcd]
# [reference: PipeDatabase.xmcd]
# [reference: pipe.xmcd]
# [reference: tank.xmcd]
# [reference: Channel.xmcd]
# [reference: elbow.xmcd]
# [reference: Sludge.xmcd]
# [reference: Manifold.xmcd]
# [reference: SedTankslopes.xmcd]
# [reference: lamina.xmcd]
# [reference: inletslopetrapezoid.xmcd]
N_SedLaunders = 2
sedlayout = 2
N_SedBays = 2
acad_version = 2008
ND_SedPipeEntrance := 8 in
L_Sed = 9.52822 m
T_PlantWall = 0.15 m
EN_PipeSpec := 4
W_Sed = 2.159 m
T_Mp := .3 m
H_SedPort := .111 m
ND_SedSludge := 3 in
H_Sed = 2.1 m
HW_Sed = 2 m
T_SedInletSlope := .05 m
AN_SedBottom = 10 deg
HW_InletChannel = 0.708877 m
H_SedAbove = 0.208275 m
N_SedSlopeInlets := 1
AN_SedTopInlet = 60 deg
ND_SedLaunder
W_InletChannel
W_ExitChannel = 0.666545 m
ND_PltWeir = 12 in
H_InletChannel = 0.808877 m
H_ExitChannel = 0.808877 m
H_PltWeir = 0.574502 m
T_ChannelWall = 0.15 m
T_ChannelWall := .15 m
N_SedTanks := 3
H_SedBelow := .6 m
D_SedSludgeOrifice := 6*10^-3*m
D_SedLaunderOrifice := 9*10^-3*m
N_SedSludgeOrifices := 26
N_SedLaunderOrifices := 38
B_SedPlateHorizontal = 4.7289 cm
B_SedSludgeOrifices := .1 m
B_SedLaunderOrifices := .1 m
L_SedPlate := .554 m
AN_SedPlate := 60 deg
N_SedPlates := 60
Amp_SedPlate := .013 m
B_SedPlate := .03 m
T_SedPlate := 3*10^-3*m
Per_SedPlate := 8.5
N_SedPlateCol := 1
Y_SedPlate = 0
# Automated Design: AutoCAD: Sedimentation Tank
# Sedimentation Tank Inputs
L_SedInletSlope := L_Sed
L_SedTopInlet := (W_Sed/(2*N_SedBays))/cos(AN_SedTopInlet) = 1.0795 m
L_SedTopInlet := L_SedInlet = 0.9545 m
S_SedInlet := (1.5*innerD(ND_SedPipeEntrance, EN_PipeSpec)) + (ND_SedSludge/2*atan(AN_SedBottom))
L_ChannelInlet := W_InletChannel + T_PlantWall
W_ChannelInlet := W_InletChannel
L_SedSlopeInlets := L_SedInletSlope
# Dimension Values
channelbox_dim :=
    dim ← [W_InletChannel; (N_SedTanks*W_Sed) + ((N_SedTanks + 1)*T_PlantWall); H_InletChannel] if sedlayout == 2
    dim ← [W_InletChannel; N_SedTanks*(W_Sed + T_PlantWall); H_InletChannel] if sedlayout == 3
    return dim
echannelbox_dim := [W_ExitChannel; N_SedTanks*(W_Sed + T_PlantWall); H_ExitChannel]
channelinletbox1_dim := [T_PlantWall; L_ChannelInlet; H_InletChannel]
channelinletbox2_dim := [W_ChannelInlet; W_Sed; H_Sed]
channelclosebox_dim := [W_InletChannel + T_ChannelWall + T_PlantWall; T_PlantWall; H_InletChannel + T_ChannelWall]
sedbottombox_dim := [-L_Sed; W_Sed; outerdiameter(ND_SedSludge)]
channelinletwall_dim := [T_ChannelWall; W_Sed; H_Sed]
echanneltank_dim := [
    S_Elbow + ElbowRadius(ND_PltWeir) + ConRadius(ND_PltWeir) + SocketDepth(ND_PltWeir);
    4*ConRadius(ND_PltWeir) + 3*S_Elbow;
    H_Sed
]
echanneltankbox_dim := [
    -(S_Elbow + ElbowRadius(ND_PltWeir) + ConRadius(ND_PltWeir) + SocketDepth(ND_PltWeir));
    4*ConRadius(ND_PltWeir) + 3*S_Elbow;
    ConRadius(ND_PltWeir) + ElbowRadius(ND_PltWeir) + SocketDepth(ND_PltWeir)
]
ichanneltank_dim := [
    S_Elbow + ElbowRadius(ND_PltWeir) + ConRadius(ND_PltWeir) + SocketDepth(ND_PltWeir);
    (2*ConRadius(ND_PltWeir)) + (2*S_Elbow);
    H_Sed
]
ichanneltankbox_dim := [
    -(S_Elbow + ElbowRadius(ND_PltWeir) + ConRadius(ND_PltWeir) + SocketDepth(ND_PltWeir));
    (2*ConRadius(ND_PltWeir)) + (2*S_Elbow);
    ConRadius(ND_PltWeir) + ElbowRadius(ND_PltWeir) + SocketDepth(ND_PltWeir)
]
# Origins Points
channel_origin :=
    if sedlayout == 2
        origin ← [
            Plant_Origin[0] - L_Sed + W_InletChannel;
            Plant_Origin[1] - T_PlantWall;
            Plant_Origin[2] + H_Sed - H_InletChannel
        ]
    if sedlayout == 3
        origin ← [
            Plant_Origin[0] - L_Sed + W_InletChannel;
            Plant_Origin[1] - T_PlantWall;
            Plant_Origin[2] + H_Sed - H_InletChannel
        ]
    if sedlayout == 4
        origin ← [
            Plant_Origin[0] - L_Sed + W_ChannelInlet;
            Plant_Origin[1] - T_PlantWall;
            Plant_Origin[2] + H_Sed - H_InletChannel
        ]
    return origin
    = [-8.86168; -0.15; 1.29112] m
echannel_origin :=
    origin ← [0; 0; 0]*m
    origin ← [Plant_Origin[0]; Plant_Origin[1] - T_PlantWall; Plant_Origin[2] + H_Sed - H_ExitChannel] if sedlayout == 2
    if sedlayout == 3
        origin ← [
            Plant_Origin[0] - L_Sed + W_InletChannel + T_ChannelWall + W_ExitChannel;
            Plant_Origin[1] - T_PlantWall;
            Plant_Origin[2] + H_Sed - H_ExitChannel
        ]
    if sedlayout == 4
        origin ← [
            Plant_Origin[0] - L_Sed + W_ChannelInlet + T_ChannelWall + W_ExitChannel;
            Plant_Origin[1] - T_PlantWall;
            Plant_Origin[2] + H_Sed - H_ExitChannel
        ]
    return origin
channelinletwall_origin := [Plant_Origin[0] - L_Sed + W_ChannelInlet; Plant_Origin[1]; Plant_Origin[2]]
lamina_origin :=
    origin ← [Plant_Origin[0]; Plant_Origin[1]; Plant_Origin[2] + Z_SedSlopes + H_SedBetween] if sedlayout == 1
    if sedlayout == 2
        origin ← [
            Plant_Origin[0] - W_ExitChannel - T_ChannelWall - (L_SedPlate*cos(AN_SedPlate));
            Plant_Origin[1];
            Plant_Origin[2] + Z_SedSlopes + H_SedBetween
        ]
    if sedlayout == 3
        origin ← [
            Plant_Origin[0] - (L_SedPlate*cos(AN_SedPlate));
            Plant_Origin[1];
            Plant_Origin[2] + Z_SedSlopes + H_SedBetween
        ]
    origin ← [Plant_Origin[0]; Plant_Origin[1]; Plant_Origin[2] + Z_SedSlopes + H_SedBetween] if sedlayout == 4
    return origin
echanneltank_origin :=
    if sedlayout == 2
        origin ← [
            Plant_Origin[0];
            Plant_Origin[1] - T_PlantWall - (4*ConRadius(ND_PltWeir)) - (3*S_Elbow);
            Plant_Origin[2]
        ]
    if sedlayout == 3
        origin ← [
            Plant_Origin[0] - L_Sed + W_InletChannel + T_ChannelWall + S_Elbow + ElbowRadius(ND_PltWeir) + ConRadius(ND_PltWeir) + SocketDepth(ND_PltWeir);
            Plant_Origin[1] - T_PlantWall - (4*ConRadius(ND_PltWeir)) - (3*S_Elbow);
            Plant_Origin[2]
        ]
    origin
ichanneltank_origin :=
    if sedlayout == 2
        origin ← [
            Plant_Origin[0] - L_Sed + W_InletChannel;
            Plant_Origin[1] - T_PlantWall - (2*ConRadius(ND_PltWeir)) - (2*S_Elbow);
            Plant_Origin[2]
        ]
    if sedlayout == 3
        origin ← [
            Plant_Origin[0] - L_Sed + W_InletChannel;
            Plant_Origin[1] - T_PlantWall - (2*ConRadius(ND_PltWeir)) - (2*S_Elbow);
            Plant_Origin[2]
        ]
    origin
    = [-8.86168; -0.63862; 0] m
manifold_origin :=
    if sedlayout == 1
        origin ← [
            Plant_Origin[0] - L_Sed + W_InletChannel + T_ChannelWall + 2*ElbowRadius(ND_SedLaunder);
            Plant_Origin[1] + W_Sed/(2*N_SedLaunders);
            Plant_Origin[2] + HW_Sed - H_SedAbove + outerradius(ND_SedLaunder)
        ]
    if sedlayout == 2
        origin ← [
            Plant_Origin[0] - L_Sed + W_InletChannel + T_ChannelWall;
            Plant_Origin[1] + W_Sed/(2*N_SedLaunders);
            Plant_Origin[2] + HW_Sed - H_SedAbove + outerradius(ND_SedLaunder)
        ]
    if sedlayout == 3
        origin ← [
            Plant_Origin[0] - L_Sed + W_InletChannel + T_ChannelWall + W_ExitChannel;
            Plant_Origin[1] + W_Sed/(2*N_SedLaunders);
            Plant_Origin[2] + HW_Sed - H_SedAbove + outerradius(ND_SedLaunder)
        ]
    if sedlayout == 4
        origin ← [
            Plant_Origin[0] - L_Sed + W_ChannelInlet + T_ChannelWall + W_ExitChannel;
            Plant_Origin[1] + W_Sed/(2*N_SedLaunders);
            Plant_Origin[2] + HW_Sed - H_SedAbove + outerradius(ND_SedLaunder)
        ]
    return origin
    = [-8.71168; 0.53975; 1.87586] m
waste_origin := [
    Plant_Origin[0] - L_Sed;
    Plant_Origin[1] + W_Sed/(2*N_SedBays);
    Plant_Origin[2] + outerdiameter(ND_SedSludge)/2
]
channelbox_origin := [Plant_Origin[0] - L_Sed; Plant_Origin[1] - T_PlantWall; Plant_Origin[2] + H_Sed - H_InletChannel]
echannelbox_origin :=
    origin ← [0; 0; 0]*m
    if sedlayout == 2
        origin ← [
            Plant_Origin[0] - W_ExitChannel;
            Plant_Origin[1] - T_PlantWall;
            Plant_Origin[2] + H_Sed - H_ExitChannel
        ]
    if sedlayout == 3
        origin ← [
            Plant_Origin[0] - L_Sed + W_InletChannel + T_ChannelWall;
            Plant_Origin[1] - T_PlantWall;
            Plant_Origin[2] + H_Sed - H_ExitChannel
        ]
    if sedlayout == 4
        origin ← [
            Plant_Origin[0] - L_Sed + W_ChannelInlet + T_ChannelWall;
            Plant_Origin[1] - T_PlantWall;
            Plant_Origin[2] + H_Sed - H_ExitChannel
        ]
    return origin
channelinletbox1_origin := [
    Plant_Origin[0] - L_Sed - T_PlantWall;
    Plant_Origin[1] + (.5*W_Sed) - (.5*L_ChannelInlet);
    Plant_Origin[2] + H_Sed - H_InletChannel
]
channelinletbox2_origin := [Plant_Origin[0] - L_Sed; Plant_Origin[1]; Plant_Origin[2]]
channelclosebox_origin := [
    Plant_Origin[0] - L_Sed - T_PlantWall - W_InletChannel - T_ChannelWall;
    Plant_Origin[1] - T_PlantWall;
    Plant_Origin[2] + H_Sed - H_InletChannel - T_ChannelWall
]
SedSlopes_Origin := Plant_Origin
inletslopes_origin := [
    Plant_Origin[0] - L_Sed;
    Plant_Origin[1] + W_Sed/(2*N_SedBays);
    Plant_Origin[2] + outerdiameter(ND_SedSludge)
]
sedtankinletweirelbow_origin := [
    Plant_Origin[0] - L_Sed + echanneltank_dim[0] - SocketDepth(ND_PltWeir);
    Plant_Origin[1] - T_PlantWall - S_Elbow - ConRadius(ND_PltWeir);
    Plant_Origin[2] + ElbowRadius(ND_PltWeir) + ConRadius(ND_PltWeir)
]
sedtankexitweirelbow_origin :=
    if sedlayout == 2
        origin ← [
            Plant_Origin[0] - SocketDepth(ND_PltWeir);
            Plant_Origin[1] - T_PlantWall - S_Elbow - ConRadius(ND_PltWeir);
            Plant_Origin[2] + ElbowRadius(ND_PltWeir) + ConRadius(ND_PltWeir)
        ]
    if sedlayout == 3
        origin ← [
            Plant_Origin[0] - L_Sed + W_InletChannel + T_ChannelWall + echanneltank_dim[0] - SocketDepth(ND_PltWeir);
            Plant_Origin[1] - T_PlantWall - S_Elbow - ConRadius(ND_PltWeir);
            Plant_Origin[2] + ElbowRadius(ND_PltWeir) + ConRadius(ND_PltWeir)
        ]
    return ← origin
exitweirelbowcopy1_point :=
    point ← [Plant_Origin[0]; Plant_Origin[1] - T_PlantWall - S_Elbow - ConRadius(ND_PltWeir); Plant_Origin[2]] if sedlayout == 2
    if sedlayout == 3
        point ← [
            Plant_Origin[0] - L_Sed + W_InletChannel + T_ChannelWall + echanneltank_dim[0];
            Plant_Origin[1] - T_PlantWall - S_Elbow - ConRadius(ND_PltWeir);
            Plant_Origin[2]
        ]
    return point
exitweirelbowcopy2_point :=
    if sedlayout == 2
        point ← [
            Plant_Origin[0];
            Plant_Origin[1] - T_PlantWall - 2*S_Elbow - 3*ConRadius(ND_PltWeir);
            Plant_Origin[2]
        ]
    if sedlayout == 3
        point ← [
            Plant_Origin[0] - L_Sed + W_InletChannel + T_ChannelWall + echanneltank_dim[0];
            Plant_Origin[1] - T_PlantWall - 2*S_Elbow - 3*ConRadius(ND_PltWeir);
            Plant_Origin[2]
        ]
    return point
exitweirpipecopy1_point :=
    if sedlayout == 2
        point ← [
            Plant_Origin[0] - SocketDepth(ND_PltWeir) - ElbowRadius(ND_PltWeir) - innerR(ND_PltWeir, EN_PipeSpec);
            Plant_Origin[1] - T_PlantWall - S_Elbow - ConRadius(ND_PltWeir);
            Plant_Origin[2] + ConRadius(ND_PltWeir) + ElbowRadius(ND_PltWeir)
        ]
    if sedlayout == 3
        point ← [
            Plant_Origin[0] - L_Sed + W_InletChannel + T_ChannelWall + echanneltank_dim[0] - SocketDepth(ND_PltWeir) - ElbowRadius(ND_PltWeir) - innerR(ND_PltWeir, EN_PipeSpec);
            Plant_Origin[1] - T_PlantWall - S_Elbow - ConRadius(ND_PltWeir);
            Plant_Origin[2] + ConRadius(ND_PltWeir) + ElbowRadius(ND_PltWeir)
        ]
    return point
exitweirpipecopy2_point :=
    if sedlayout == 2
        point ← [
            Plant_Origin[0] - SocketDepth(ND_PltWeir) - ElbowRadius(ND_PltWeir) - innerR(ND_PltWeir, EN_PipeSpec);
            Plant_Origin[1] - T_PlantWall - 2*S_Elbow - 3*ConRadius(ND_PltWeir);
            Plant_Origin[2] + ConRadius(ND_PltWeir) + ElbowRadius(ND_PltWeir)
        ]
    if sedlayout == 3
        point ← [
            Plant_Origin[0] - L_Sed + W_InletChannel + T_ChannelWall + echanneltank_dim[0] - SocketDepth(ND_PltWeir) - ElbowRadius(ND_PltWeir) - innerR(ND_PltWeir, EN_PipeSpec);
            Plant_Origin[1] - T_PlantWall - 2*S_Elbow - 3*ConRadius(ND_PltWeir);
            Plant_Origin[2] + ConRadius(ND_PltWeir) + ElbowRadius(ND_PltWeir)
        ]
    return point
sedtankinletpipe1_origin := [
    Plant_Origin[0] - L_Sed + (.5*W_InletChannel);
    Plant_Origin[1] + (W_Sed/(2*N_SedInletPipes*N_SedBays));
    Plant_Origin[2] + H_Sed - H_InletChannel
]
inletweirpipe_origin := [
    Plant_Origin[0] - L_Sed + S_Elbow + ConRadius(ND_PltWeir);
    Plant_Origin[1] - T_PlantWall - S_Elbow - ConRadius(ND_PltWeir);
    Plant_Origin[2] + ElbowRadius(ND_PltWeir) + ConRadius(ND_PltWeir)
]
exitweirpipe_origin :=
    if sedlayout == 2
        origin ← [
            Plant_Origin[0] - ElbowRadius(ND_PltWeir) - SocketDepth(ND_PltWeir);
            Plant_Origin[1] - T_PlantWall - S_Elbow - ConRadius(ND_PltWeir);
            Plant_Origin[2] + ElbowRadius(ND_PltWeir) + ConRadius(ND_PltWeir)
        ]
    if sedlayout == 3
        origin ← [
            Plant_Origin[0] - L_Sed + W_InletChannel + T_ChannelWall + S_Elbow + ConRadius(ND_PltWeir);
            Plant_Origin[1] - T_PlantWall - S_Elbow - ConRadius(ND_PltWeir);
            Plant_Origin[2] + ElbowRadius(ND_PltWeir) + ConRadius(ND_PltWeir)
        ]
    return ← origin
inletweirpipe_length := H_Sed - H_InletChannel + HW_InletChannel - ElbowRadius(ND_PltWeir) - ConRadius(ND_PltWeir) = 1.34849 m
exitweirpipe_length := H_Sed - H_ExitChannel + H_PltWeir - ElbowRadius(ND_PltWeir) - ConRadius(ND_PltWeir)
# Sedtank Scripts
Sedtanktankscript :=
    viewtops ← viewtop1
    layer1 ← layer_new("tank", grey)
    tank1 ← Tank(Plant_Origin, [L_Sed; W_Sed; H_Sed], T_PlantWall)
    boxt ← box(Plant_Origin, sedbottombox_dim)
    uniont ← union_allA
    layerset ← layer_set("0")
    layerfreeze1 ← layer_freeze("tank")
    one ← stack(viewtops, layer1, tank1, boxt, uniont, layerset, layerfreeze1)
    return one
Sedtankexitchannelscript :=
    layer2 ← layer_new("echannel", ltgrey)
    channel1 ← ChannelDrawing(echannel_origin, [W_Sed + 2*T_PlantWall; W_ExitChannel; H_ExitChannel], T_ChannelWall)
    rotate1 ← rotate(echannel_origin, 90)
    bigunion ← union_allA
    layerset ← layer_set("0")
    layerfreeze2 ← layer_freeze("echannel")
    one ← stack(layer2, channel1, rotate1, bigunion, layerset, layerfreeze2)
    return ← one
Sedtankinletchannelscript :=
    layer2 ← layer_new("channel", ltgrey)
    channel1 ← ChannelDrawing(channel_origin, [W_Sed + 2*T_PlantWall; W_InletChannel; H_InletChannel], T_ChannelWall)
    rotate1 ← rotate(channel_origin, 90)
    box1 ← box(channelinletwall_origin, channelinletwall_origin + channelinletwall_dim)
    bigunion ← union_allA
    box2 ← box(channelinletbox1_origin, channelinletbox1_origin + channelinletbox1_dim)
    subtract2 ← subtractD(Plant_Origin, channelinletbox1_origin)
    box3 ← box(channelinletbox2_origin, channelinletbox2_origin + channelinletbox2_dim)
    subtract3 ← subtractD(Plant_Origin, channelinletbox2_origin)
    layerset ← layer_set("0")
    viewtops ← viewtop1
    layerfreeze2 ← layer_freeze("channel")
    one ← stack(layer2, channel1, rotate1, bigunion, layerset, viewtops, layerfreeze2) if sedlayout == 1
    one ← stack(layer2, channel1, rotate1, bigunion, layerset, layerfreeze2) if sedlayout == 2
    one ← stack(layer2, channel1, rotate1, bigunion, layerset, layerfreeze2) if sedlayout == 3
    one ← stack(layer2, channel1, rotate1, box1, bigunion, viewtops, box2, subtract2, box3, subtract3, layerset, viewtops, layerfreeze2) if sedlayout == 4
    return ← one
# pipe2_origin | pipe3_origin | pipe11_origin | pipe14_origin | pipe6_1ength | pipe7_length | pipe8_length | pipe13_length | pipe14_length
# pipe4_origin | pipe5_origin | pipe8_origin | pipe5_1ength
# pipe6_origin | pipe7_origin | pipe9_origin | pipe10_origin | pipe12_origin | pipe13_origin | pipe1_length
Sedtankarrayscript :=
    layerthaw2 ← layer_thaw("channel")
    layerthaw2e ← layer_thaw("echannel")
    viewtop ← viewtop1
    arraytank1 ← concat("-array", sp, "ALL", sp, sp, "r", sp, stringit_nounits(N_SedTanks), sp, "1", sp, stringit(W_Sed + T_PlantWall))
    layerfreeze14 ← layer_freeze("channel")
    layerfreeze15 ← layer_freeze("echannel")
    bigunion ← union_allA
    layerset ← layer_set("0")
    layerfreeze16 ← layer_freeze("slopes")
    one ← stack(layerthaw2, layerthaw2e)
    two ← stack(viewtop, arraytank1)
    three ← stack(layerfreeze14, layerfreeze15, bigunion, layerset, layerfreeze16, layerthaw2, bigunion, layerset, layerfreeze14, layerthaw2e, bigunion, layerset, layerfreeze15)
    return stack(one, two, three)
Sedtankopenchannelscript :=
    layerthawtank ← layer_thaw("slopes")
    viewtop ← viewtop1
    box1 ← box(channelbox_origin, [
        channelbox_origin[0] + channelbox_dim[0];
        channelbox_origin[1] + channelbox_dim[1];
        channelbox_origin[2] + channelbox_dim[2]
    ])
    subtract1 ← subtractD(Plant_Origin, channelbox_origin)
    box2 ← box(echannelbox_origin, [
        echannelbox_origin[0] + echannelbox_dim[0];
        echannelbox_origin[1] + echannelbox_dim[1];
        echannelbox_origin[2] + echannelbox_dim[2]
    ])
    subtract2 ← subtractD([Plant_Origin[0] + T_PlantWall; Plant_Origin[1]; Plant_Origin[2]], echannelbox_origin)
    layerset1 ← layer_set("channel")
    box3 ← box(channelclosebox_origin, channelclosebox_origin + channelclosebox_dim)
    bigunion ← union_allA
    layerset ← layer_set("0")
    layerfreezech ← layer_freeze("channel")
    layerfreezetank ← layer_freeze("slopes")
    one ← stack(layerthawtank, viewtop, box1, viewtop, subtract1, layerset, layerfreezetank) if sedlayout == 1
    one ← stack(layerthawtank, viewtop, box1, viewtop, subtract1, viewtop, box2, viewtop, subtract2, layerset, layerfreezetank) if sedlayout == 2
    one ← stack(layerthawtank, viewtop, box1, viewtop, subtract1, viewtop, box2, viewtop, subtract2, layerset, layerfreezetank) if sedlayout == 3
    one ← stack(layerthawtank, viewtop, box2, viewtop, subtract2, layerset1, layerfreezetank, box3, bigunion, layerset, layerfreezech) if sedlayout == 4
    return one
sedechanneltankscript :=
    viewtope ← viewtop1
    layernewect ← layer_new("echanneltank", ltgrey)
    tankect ← Tank(echanneltank_origin, echanneltank_dim, T_PlantWall)
    boxectb ← box(echanneltank_origin, echanneltank_origin + echanneltankbox_dim)
    bigunion ← union_allA
    boxect ← box(echannelbox_origin, echannelbox_origin + echannelbox_dim)
    subtractect ← subtractD(echanneltank_origin, echannelbox_origin)
    layerset ← layer_set("0")
    layerfreezeect ← layer_freeze("echanneltank")
    layernewewe ← layer_new("exitweirelbow", green)
    elbowewe ← elbow(sedtankexitweirelbow_origin, ND_PltWeir, EN_PipeSpec)
    rotateewe1 ← rotate_3d([
        sedtankexitweirelbow_origin[0] + ElbowRadius(ND_PltWeir);
        sedtankexitweirelbow_origin[1];
        sedtankexitweirelbow_origin[2] - outerradius(ND_PltWeir)
    ], sedtankexitweirelbow_origin, "y", 90)
    rotateewe2 ← rotate_3d([
        sedtankexitweirelbow_origin[0];
        sedtankexitweirelbow_origin[1] + ElbowRadius(ND_PltWeir) - outerradius(ND_PltWeir);
        sedtankexitweirelbow_origin[2]
    ], sedtankexitweirelbow_origin, "z", 90)
    copyewe ← copyB(exitweirelbowcopy1_point, exitweirelbowcopy1_point, exitweirelbowcopy2_point)
    layerfreezeewe ← layer_freeze("exitweirelbow")
    layernewewp ← layer_new("exitweir", blue)
    pipeewp ← Pipe(exitweirpipe_origin, ND_PltWeir, exitweirpipe_length, EN_PipeSpec)
    copyewp ← copyB(exitweirpipecopy1_point, exitweirpipecopy1_point, exitweirpipecopy2_point)
    layerfreezeewp ← layer_freeze("exitweir")
    one ← stack(viewtope, layernewect, tankect, boxectb, bigunion, boxect, subtractect, layerset, layerfreezeect, layernewewe, elbowewe, rotateewe1, rotateewe2, copyewe, layerset, layerfreezeewe, layernewewp, pipeewp, copyewp, layerset, layerfreezeewp)
    return one
sedichanneltankscript :=
    viewtopi ← viewtop1
    layernewict ← layer_new("ichanneltank", ltgrey)
    tankict ← Tank(ichanneltank_origin, ichanneltank_dim, T_PlantWall)
    boxictb ← box(ichanneltank_origin, ichanneltank_origin + ichanneltankbox_dim)
    bigunion ← union_allA
    boxict ← box(channelbox_origin, channelbox_origin + channelbox_dim)
    subtractict ← subtractD(ichanneltank_origin, channelbox_origin)
    layerset ← layer_set("0")
    layerfreezeict ← layer_freeze("ichanneltank")
    layernewiwe ← layer_new("inletweirelbow", green)
    elbowiwe ← elbow(sedtankinletweirelbow_origin, ND_PltWeir, EN_PipeSpec)
    rotateiwe1 ← rotate_3d([
        sedtankinletweirelbow_origin[0] + ElbowRadius(ND_PltWeir);
        sedtankinletweirelbow_origin[1];
        sedtankinletweirelbow_origin[2] - outerradius(ND_PltWeir)
    ], sedtankinletweirelbow_origin, "y", 90)
    rotateiwe2 ← rotate_3d([
        sedtankinletweirelbow_origin[0];
        sedtankinletweirelbow_origin[1] + ElbowRadius(ND_PltWeir) - outerradius(ND_PltWeir);
        sedtankinletweirelbow_origin[2]
    ], sedtankinletweirelbow_origin, "z", 90)
    layerfreezeiwe ← layer_freeze("inletweirelbow")
    layernewiwp ← layer_new("inletweir", blue)
    pipeiwp ← Pipe(inletweirpipe_origin, ND_PltWeir, inletweirpipe_length, EN_PipeSpec)
    layerfreezeiwp ← layer_freeze("inletweir")
    one ← stack(viewtopi, layernewict, tankict, boxictb, bigunion, boxict, subtractict, layerset, layerfreezeict, layernewiwe, elbowiwe, rotateiwe1, rotateiwe2, layerset, layerfreezeiwe, layernewiwp, pipeiwp, layerset, layerfreezeiwp)
    return one
SedTankTanksLayout2 := stack(Sedtanktankscript, Sedtankexitchannelscript, Sedtankinletchannelscript, Sedtankarrayscript, Sedtankopenchannelscript, sedechanneltankscript, sedichanneltankscript)
SedTankLayout2 := stack(Sedtanktankscript, Sedtankinletslopescript, Sedtankexitchannelscript, Sedtankinletchannelscript, Sedtankinletpipescript, Sedtankmanifoldscript, Sedtanksludgescript, Sedtanklaminascript, Sedtankarrayscript, Sedtankopenchannelscript, sedechanneltankscript, sedichanneltankscript)  # error: This variable is undefined.
SedTankLayout2 := SedTankTanksLayout2
SedTankLayout3 := stack(Sedtanktankscript, Sedtankinletslopescript, Sedtankexitchannelscript, Sedtankinletchannelscript, Sedtankinletpipescript, Sedtankmanifoldscript, Sedtanksludgescript, Sedtanklaminascript, Sedtankarrayscript, Sedtankopenchannelscript, sedechanneltankscript, sedichanneltankscript)  # error: This variable is undefined.
SedTankLayout4 := stack(Sedtanktankscript, Sedtankinletslopescript, Sedtankexitchannelscript, Sedtankinletchannelscript, Sedtankinletpipescript, Sedtankmanifoldscript, Sedtanksludgescript, Sedtanklaminascript, Sedtankarrayscript, Sedtankopenchannelscript, sedechanneltankscript)  # error: This variable is undefined.
SedTank :=
    SedTankLayout2 if sedlayout == 2
    SedTankLayout3 if sedlayout == 3
    SedTankLayout4 if sedlayout == 4  # error: This variable is undefined.
# [component: inputs SedTankLayout1]
# [component: inputs SedTankLayout2]
# [component: inputs SedTankLayout3]
# [component: inputs SedTankLayout4]
