# [reference: MasterProgram - 4 communities.xmcd]
# [reference: basics - Copy.xmcd]
# [reference: PipeDatabase.xmcd]
# [reference: pipe.xmcd]
# [reference: tank.xmcd]
# [reference: Channel.xmcd]
# [reference: elbow.xmcd]
# [reference: Sludge.xmcd]
# [reference: Manifold.xmcd]
# [reference: SedTankslopes.xmcd]
# [reference: lamina.xmcd]
# [reference: inletslopetrapezoid.xmcd]
N_SedLaunders = 2
sedlayout = 2
N_SlopePairs = 2
acad_version = 2008
ND_SedPipeEntrance := 8 in
L_Sed := 3.621 m
T_PlantWall = 0.15 m
EN_PipeSpec := 4
W_Sed = 2.159 m
T_Mp := .3 m
H_SedPort := .111 m
ND_SedSludge := 3 in
H_Sed := 1.65 m
HW_Sed := 1.55 m
T_SedInletSlope := .05 m
AN_SedBottom = 10 deg
HW_InletChannel := 0.59 m
H_SedAbove := 0.129 m
N_SedSlopeInlets := 1
AN_SedTopInlet = 50 deg
ND_SedLaunder := 3 in
W_InletChannel := 0.259 m
W_ExitChannel := 0.259 m
ND_PltWeir := 6 in
H_InletChannel := 0.69 m
H_ExitChannel := 0.69 m
H_PltWeir := 0.512 m
T_ChannelWall = 0.15 m
T_ChannelWall := .15 m
N_SedTanks := 3
H_SedBelow := .6 m
D_SedSludgeOrifice := 6*10^-3*m
D_SedLaunderOrifice := 9*10^-3*m
N_SedSludgeOrifices := 26
N_SedLaunderOrifices := 38
B_SedPlateHorizontal := 0.033 m
B_SedSludgeOrifices := .1 m
B_SedLaunderOrifices := .1 m
L_SedPlate := .554 m
AN_SedPlate := 60 deg
N_SedPlates := 60
Amp_SedPlate := .013 m
B_SedPlate := .03 m
T_SedPlate := 3*10^-3*m
Per_SedPlate := 8.5
N_SedPlateCol := 1
Y_SedPlate = 0
# Automated Design: AutoCAD: Sedimentation Tank
# Sedimentation Tank Inputs
L_SedInletSlope := L_Sed
L_SedTopInlet := (W_Sed/(2*N_SlopePairs))/cos(AN_SedTopInlet) = 0.839702 m
S_SedInlet := (1.5*innerD(ND_SedPipeEntrance, EN_PipeSpec)) + (ND_SedSludge/2*atan(AN_SedBottom))
L_ChannelInlet := W_InletChannel + T_PlantWall
W_ChannelInlet := W_InletChannel
L_SedSlopeInlets := L_SedInletSlope
# Dimension Values
channelbox_dim :=
    dim ← [W_InletChannel; (N_SedTanks*W_Sed) + ((N_SedTanks + 1)*T_PlantWall); H_InletChannel] if sedlayout == 2
    dim ← [W_InletChannel; N_SedTanks*(W_Sed + T_PlantWall); H_InletChannel] if sedlayout == 3
    return dim
echannelbox_dim := [W_ExitChannel; N_SedTanks*(W_Sed + T_PlantWall); H_ExitChannel]
channelinletbox1_dim := [T_PlantWall; L_ChannelInlet; H_InletChannel]
channelinletbox2_dim := [W_ChannelInlet; W_Sed; H_Sed]
channelclosebox_dim := [W_InletChannel + T_ChannelWall + T_PlantWall; T_PlantWall; H_InletChannel + T_ChannelWall]
sedbottombox_dim := [-L_Sed; W_Sed; outerdiameter(ND_SedSludge)]
channelinletwall_dim := [T_ChannelWall; W_Sed; H_Sed]
echanneltank_dim := [
    S_Elbow + ElbowRadius(ND_PltWeir) + ConRadius(ND_PltWeir) + SocketDepth(ND_PltWeir);
    4*ConRadius(ND_PltWeir) + 3*S_Elbow;
    H_Sed
]
echanneltankbox_dim := [
    -(S_Elbow + ElbowRadius(ND_PltWeir) + ConRadius(ND_PltWeir) + SocketDepth(ND_PltWeir));
    4*ConRadius(ND_PltWeir) + 3*S_Elbow;
    ConRadius(ND_PltWeir) + ElbowRadius(ND_PltWeir) + SocketDepth(ND_PltWeir)
]
ichanneltank_dim := [
    S_Elbow + ElbowRadius(ND_PltWeir) + ConRadius(ND_PltWeir) + SocketDepth(ND_PltWeir);
    (2*ConRadius(ND_PltWeir)) + (2*S_Elbow);
    H_Sed
]
ichanneltankbox_dim := [
    -(S_Elbow + ElbowRadius(ND_PltWeir) + ConRadius(ND_PltWeir) + SocketDepth(ND_PltWeir));
    (2*ConRadius(ND_PltWeir)) + (2*S_Elbow);
    ConRadius(ND_PltWeir) + ElbowRadius(ND_PltWeir) + SocketDepth(ND_PltWeir)
]
# Origins Points
channel_origin :=
    if sedlayout == 2
        origin ← [
            Plant_Origin[0] - L_Sed + W_InletChannel;
            Plant_Origin[1] - T_PlantWall;
            Plant_Origin[2] + H_Sed - H_InletChannel
        ]
    if sedlayout == 3
        origin ← [
            Plant_Origin[0] - L_Sed + W_InletChannel;
            Plant_Origin[1] - T_PlantWall;
            Plant_Origin[2] + H_Sed - H_InletChannel
        ]
    if sedlayout == 4
        origin ← [
            Plant_Origin[0] - L_Sed + W_ChannelInlet;
            Plant_Origin[1] - T_PlantWall;
            Plant_Origin[2] + H_Sed - H_InletChannel
        ]
    return origin
    = [-3.362; -0.15; 0.96] m
echannel_origin :=
    origin ← [0; 0; 0]*m
    origin ← [Plant_Origin[0]; Plant_Origin[1] - T_PlantWall; Plant_Origin[2] + H_Sed - H_ExitChannel] if sedlayout == 2
    if sedlayout == 3
        origin ← [
            Plant_Origin[0] - L_Sed + W_InletChannel + T_ChannelWall + W_ExitChannel;
            Plant_Origin[1] - T_PlantWall;
            Plant_Origin[2] + H_Sed - H_ExitChannel
        ]
    if sedlayout == 4
        origin ← [
            Plant_Origin[0] - L_Sed + W_ChannelInlet + T_ChannelWall + W_ExitChannel;
            Plant_Origin[1] - T_PlantWall;
            Plant_Origin[2] + H_Sed - H_ExitChannel
        ]
    return origin
channelinletwall_origin := [Plant_Origin[0] - L_Sed + W_ChannelInlet; Plant_Origin[1]; Plant_Origin[2]]
sedlayout = 2
lamina_origin :=
    origin ← [Plant_Origin[0]; Plant_Origin[1]; Plant_Origin[2] + Z_SedSlopes + H_SedBetween] if sedlayout == 1
    if sedlayout == 2
        origin ← [
            Plant_Origin[0] - W_ExitChannel - T_ChannelWall - (L_SedPlate*cos(AN_SedPlate));
            Plant_Origin[1];
            Plant_Origin[2] + Z_SedSlopes + H_SedBetween
        ]
    if sedlayout == 3
        origin ← [
            Plant_Origin[0] - (L_SedPlate*cos(AN_SedPlate));
            Plant_Origin[1];
            Plant_Origin[2] + Z_SedSlopes + H_SedBetween
        ]
    origin ← [Plant_Origin[0]; Plant_Origin[1]; Plant_Origin[2] + Z_SedSlopes + H_SedBetween] if sedlayout == 4
    return origin
echanneltank_origin :=
    if sedlayout == 2
        origin ← [
            Plant_Origin[0];
            Plant_Origin[1] - T_PlantWall - (4*ConRadius(ND_PltWeir)) - (3*S_Elbow);
            Plant_Origin[2]
        ]
    if sedlayout == 3
        origin ← [
            Plant_Origin[0] - L_Sed + W_InletChannel + T_ChannelWall + S_Elbow + ElbowRadius(ND_PltWeir) + ConRadius(ND_PltWeir) + SocketDepth(ND_PltWeir);
            Plant_Origin[1] - T_PlantWall - (4*ConRadius(ND_PltWeir)) - (3*S_Elbow);
            Plant_Origin[2]
        ]
    origin
ichanneltank_origin :=
    if sedlayout == 2
        origin ← [
            Plant_Origin[0] - L_Sed + W_InletChannel;
            Plant_Origin[1] - T_PlantWall - (2*ConRadius(ND_PltWeir)) - (2*S_Elbow);
            Plant_Origin[2]
        ]
    if sedlayout == 3
        origin ← [
            Plant_Origin[0] - L_Sed + W_InletChannel;
            Plant_Origin[1] - T_PlantWall - (2*ConRadius(ND_PltWeir)) - (2*S_Elbow);
            Plant_Origin[2]
        ]
    origin
    = [-3.362; -0.45193; 0] m
manifold_origin :=
    if sedlayout == 1
        origin ← [
            Plant_Origin[0] - L_Sed + W_InletChannel + T_ChannelWall + 2*ElbowRadius(ND_SedLaunder);
            Plant_Origin[1] + W_Sed/(2*N_SedLaunders);
            Plant_Origin[2] + HW_Sed - H_SedAbove + outerradius(ND_SedLaunder)
        ]
    if sedlayout == 2
        origin ← [
            Plant_Origin[0] - L_Sed + W_InletChannel + T_ChannelWall;
            Plant_Origin[1] + W_Sed/(2*N_SedLaunders);
            Plant_Origin[2] + HW_Sed - H_SedAbove + outerradius(ND_SedLaunder)
        ]
    if sedlayout == 3
        origin ← [
            Plant_Origin[0] - L_Sed + W_InletChannel + T_ChannelWall + W_ExitChannel;
            Plant_Origin[1] + W_Sed/(2*N_SedLaunders);
            Plant_Origin[2] + HW_Sed - H_SedAbove + outerradius(ND_SedLaunder)
        ]
    if sedlayout == 4
        origin ← [
            Plant_Origin[0] - L_Sed + W_ChannelInlet + T_ChannelWall + W_ExitChannel;
            Plant_Origin[1] + W_Sed/(2*N_SedLaunders);
            Plant_Origin[2] + HW_Sed - H_SedAbove + outerradius(ND_SedLaunder)
        ]
    return origin
    = [-3.212; 0.53975; 1.46545] m
waste_origin := [
    Plant_Origin[0] - L_Sed;
    Plant_Origin[1] + W_Sed/(2*N_SlopePairs);
    Plant_Origin[2] + outerdiameter(ND_SedSludge)/2
]
channelbox_origin := [Plant_Origin[0] - L_Sed; Plant_Origin[1] - T_PlantWall; Plant_Origin[2] + H_Sed - H_InletChannel]
echannelbox_origin :=
    origin ← [0; 0; 0]*m
    if sedlayout == 2
        origin ← [
            Plant_Origin[0] - W_ExitChannel;
            Plant_Origin[1] - T_PlantWall;
            Plant_Origin[2] + H_Sed - H_ExitChannel
        ]
    if sedlayout == 3
        origin ← [
            Plant_Origin[0] - L_Sed + W_InletChannel + T_ChannelWall;
            Plant_Origin[1] - T_PlantWall;
            Plant_Origin[2] + H_Sed - H_ExitChannel
        ]
    if sedlayout == 4
        origin ← [
            Plant_Origin[0] - L_Sed + W_ChannelInlet + T_ChannelWall;
            Plant_Origin[1] - T_PlantWall;
            Plant_Origin[2] + H_Sed - H_ExitChannel
        ]
    return origin
channelinletbox1_origin := [
    Plant_Origin[0] - L_Sed - T_PlantWall;
    Plant_Origin[1] + (.5*W_Sed) - (.5*L_ChannelInlet);
    Plant_Origin[2] + H_Sed - H_InletChannel
]
channelinletbox2_origin := [Plant_Origin[0] - L_Sed; Plant_Origin[1]; Plant_Origin[2]]
channelclosebox_origin := [
    Plant_Origin[0] - L_Sed - T_PlantWall - W_InletChannel - T_ChannelWall;
    Plant_Origin[1] - T_PlantWall;
    Plant_Origin[2] + H_Sed - H_InletChannel - T_ChannelWall
]
SedSlopes_Origin := Plant_Origin
inletslopes_origin := [
    Plant_Origin[0] - L_Sed;
    Plant_Origin[1] + W_Sed/(2*N_SlopePairs);
    Plant_Origin[2] + outerdiameter(ND_SedSludge)
]
sedtankinletweirelbow_origin := [
    Plant_Origin[0] - L_Sed + echanneltank_dim[0] - SocketDepth(ND_PltWeir);
    Plant_Origin[1] - T_PlantWall - S_Elbow - ConRadius(ND_PltWeir);
    Plant_Origin[2] + ElbowRadius(ND_PltWeir) + ConRadius(ND_PltWeir)
]
sedtankexitweirelbow_origin :=
    if sedlayout == 2
        origin ← [
            Plant_Origin[0] - SocketDepth(ND_PltWeir);
            Plant_Origin[1] - T_PlantWall - S_Elbow - ConRadius(ND_PltWeir);
            Plant_Origin[2] + ElbowRadius(ND_PltWeir) + ConRadius(ND_PltWeir)
        ]
    if sedlayout == 3
        origin ← [
            Plant_Origin[0] - L_Sed + W_InletChannel + T_ChannelWall + echanneltank_dim[0] - SocketDepth(ND_PltWeir);
            Plant_Origin[1] - T_PlantWall - S_Elbow - ConRadius(ND_PltWeir);
            Plant_Origin[2] + ElbowRadius(ND_PltWeir) + ConRadius(ND_PltWeir)
        ]
    return ← origin
exitweirelbowcopy1_point :=
    point ← [Plant_Origin[0]; Plant_Origin[1] - T_PlantWall - S_Elbow - ConRadius(ND_PltWeir); Plant_Origin[2]] if sedlayout == 2
    if sedlayout == 3
        point ← [
            Plant_Origin[0] - L_Sed + W_InletChannel + T_ChannelWall + echanneltank_dim[0];
            Plant_Origin[1] - T_PlantWall - S_Elbow - ConRadius(ND_PltWeir);
            Plant_Origin[2]
        ]
    return point
exitweirelbowcopy2_point :=
    if sedlayout == 2
        point ← [
            Plant_Origin[0];
            Plant_Origin[1] - T_PlantWall - 2*S_Elbow - 3*ConRadius(ND_PltWeir);
            Plant_Origin[2]
        ]
    if sedlayout == 3
        point ← [
            Plant_Origin[0] - L_Sed + W_InletChannel + T_ChannelWall + echanneltank_dim[0];
            Plant_Origin[1] - T_PlantWall - 2*S_Elbow - 3*ConRadius(ND_PltWeir);
            Plant_Origin[2]
        ]
    return point
exitweirpipecopy1_point :=
    if sedlayout == 2
        point ← [
            Plant_Origin[0] - SocketDepth(ND_PltWeir) - ElbowRadius(ND_PltWeir) - innerR(ND_PltWeir, EN_PipeSpec);
            Plant_Origin[1] - T_PlantWall - S_Elbow - ConRadius(ND_PltWeir);
            Plant_Origin[2] + ConRadius(ND_PltWeir) + ElbowRadius(ND_PltWeir)
        ]
    if sedlayout == 3
        point ← [
            Plant_Origin[0] - L_Sed + W_InletChannel + T_ChannelWall + echanneltank_dim[0] - SocketDepth(ND_PltWeir) - ElbowRadius(ND_PltWeir) - innerR(ND_PltWeir, EN_PipeSpec);
            Plant_Origin[1] - T_PlantWall - S_Elbow - ConRadius(ND_PltWeir);
            Plant_Origin[2] + ConRadius(ND_PltWeir) + ElbowRadius(ND_PltWeir)
        ]
    return point
exitweirpipecopy2_point :=
    if sedlayout == 2
        point ← [
            Plant_Origin[0] - SocketDepth(ND_PltWeir) - ElbowRadius(ND_PltWeir) - innerR(ND_PltWeir, EN_PipeSpec);
            Plant_Origin[1] - T_PlantWall - 2*S_Elbow - 3*ConRadius(ND_PltWeir);
            Plant_Origin[2] + ConRadius(ND_PltWeir) + ElbowRadius(ND_PltWeir)
        ]
    if sedlayout == 3
        point ← [
            Plant_Origin[0] - L_Sed + W_InletChannel + T_ChannelWall + echanneltank_dim[0] - SocketDepth(ND_PltWeir) - ElbowRadius(ND_PltWeir) - innerR(ND_PltWeir, EN_PipeSpec);
            Plant_Origin[1] - T_PlantWall - 2*S_Elbow - 3*ConRadius(ND_PltWeir);
            Plant_Origin[2] + ConRadius(ND_PltWeir) + ElbowRadius(ND_PltWeir)
        ]
    return point
# Pipe Origins Points
sedtankinletpipe1_origin := [
    Plant_Origin[0] - L_Sed + (.5*W_InletChannel);
    Plant_Origin[1] + (W_Sed/(2*N_SedInletPipes*N_SlopePairs));
    Plant_Origin[2] + H_Sed - H_InletChannel
]
inletweirpipe_origin := [
    Plant_Origin[0] - L_Sed + S_Elbow + ConRadius(ND_PltWeir);
    Plant_Origin[1] - T_PlantWall - S_Elbow - ConRadius(ND_PltWeir);
    Plant_Origin[2] + ElbowRadius(ND_PltWeir) + ConRadius(ND_PltWeir)
]
exitweirpipe_origin :=
    if sedlayout == 2
        origin ← [
            Plant_Origin[0] - ElbowRadius(ND_PltWeir) - SocketDepth(ND_PltWeir);
            Plant_Origin[1] - T_PlantWall - S_Elbow - ConRadius(ND_PltWeir);
            Plant_Origin[2] + ElbowRadius(ND_PltWeir) + ConRadius(ND_PltWeir)
        ]
    if sedlayout == 3
        origin ← [
            Plant_Origin[0] - L_Sed + W_InletChannel + T_ChannelWall + S_Elbow + ConRadius(ND_PltWeir);
            Plant_Origin[1] - T_PlantWall - S_Elbow - ConRadius(ND_PltWeir);
            Plant_Origin[2] + ElbowRadius(ND_PltWeir) + ConRadius(ND_PltWeir)
        ]
    return ← origin
sedtankpipe1_origin := [
    Plant_Origin[0] - L_Sed + W_InletChannel/2;
    Plant_Origin[1] + W_Sed/2 + outerradius(ND_SedLaunder) + 3*(W_Sed/2 - outerradius(ND_SedLaunder))/4;
    Plant_Origin[2] + H_Sed - H_InletChannel
]
sedtankpipe2_origin := [
    Plant_Origin[0] - L_Sed + W_InletChannel/2;
    Plant_Origin[1] + W_Sed/2 + outerradius(ND_SedLaunder) + 1*(W_Sed/2 - outerradius(ND_SedLaunder))/4;
    Plant_Origin[2] + H_Sed - H_InletChannel
]
sedtankpipe3_origin := [
    Plant_Origin[0] - L_Sed + W_InletChannel/2;
    Plant_Origin[1] + W_Sed/2 - outerradius(ND_SedLaunder) - 1*(W_Sed/2 - outerradius(ND_SedLaunder))/4;
    Plant_Origin[2] + H_Sed - H_InletChannel
]
sedtankpipe4_origin := [
    Plant_Origin[0] - L_Sed + W_InletChannel/2;
    Plant_Origin[1] + W_Sed/2 - outerradius(ND_SedLaunder) - 3*(W_Sed/2 - outerradius(ND_SedLaunder))/4;
    Plant_Origin[2] + H_Sed - H_InletChannel
]
sedtankpipe5_origin := [
    Plant_Origin[0] - L_Sed + W_InletChannel/2 + ElbowRadius(ND_SedPipeEntrance);
    Plant_Origin[1] + W_Sed/2 + outerradius(ND_SedLaunder) + 3*(W_Sed/2 - outerradius(ND_SedLaunder))/4;
    Plant_Origin[2] + W_Sed/2*tan(AN_SedBottom) + ElbowRadius(ND_SedPipeEntrance)
]
sedtankpipe6_origin := [
    Plant_Origin[0] - L_Sed + W_InletChannel/2 + ElbowRadius(ND_SedPipeEntrance);
    Plant_Origin[1] + W_Sed/2 + outerradius(ND_SedLaunder) + 1*(W_Sed/2 - outerradius(ND_SedLaunder))/4;
    Plant_Origin[2] + W_Sed/2*tan(AN_SedBottom) + ElbowRadius(ND_SedPipeEntrance)
]
sedtankpipe7_origin := [
    Plant_Origin[0] - L_Sed + W_InletChannel/2 + ElbowRadius(ND_SedPipeEntrance);
    Plant_Origin[1] + W_Sed/2 - outerradius(ND_SedLaunder) - 1*(W_Sed/2 - outerradius(ND_SedLaunder))/4;
    Plant_Origin[2] + W_Sed/2*tan(AN_SedBottom) + ElbowRadius(ND_SedPipeEntrance)
]
sedtankpipe8_origin := [
    Plant_Origin[0] - L_Sed + W_InletChannel/2 + ElbowRadius(ND_SedPipeEntrance);
    Plant_Origin[1] + W_Sed/2 - outerradius(ND_SedLaunder) - 3*(W_Sed/2 - outerradius(ND_SedLaunder))/4;
    Plant_Origin[2] + W_Sed/2*tan(AN_SedBottom) + ElbowRadius(ND_SedPipeEntrance)
]
sedtankpipe9_origin := [Plant_Origin[0] - 7*L_Sed/8; Plant_Origin[1] + W_Sed/2; Plant_Origin[2] + S_SedInlet]
sedtankpipe10_origin := [Plant_Origin[0] - 5*L_Sed/8; Plant_Origin[1] + W_Sed/2; Plant_Origin[2] + S_SedInlet]
sedtankpipe11_origin := [Plant_Origin[0] - 3*L_Sed/8; Plant_Origin[1] + W_Sed/2; Plant_Origin[2] + S_SedInlet]
sedtankpipe12_origin := [Plant_Origin[0] - L_Sed/8; Plant_Origin[1] + W_Sed/2; Plant_Origin[2] + S_SedInlet]
sedtankpipe13_origin := [
    Plant_Origin[0] - L_Sed + W_InletChannel + T_ChannelWall + ElbowRadius(ND_SedLaunder);
    Plant_Origin[1] + W_Sed/2;
    Plant_Origin[2] + H_Sed - H_InletChannel - T_Mp + ElbowRadius(ND_SedLaunder)
]
sedtankpipe14_origin := [
    Plant_Origin[0] - L_Sed;
    Plant_Origin[1] + W_Sed/2;
    Plant_Origin[2] + H_Sed - H_InletChannel - T_Mp
]
sedtankbox1_origin := [Plant_Origin[0] - L_Sed; Plant_Origin[1] + W_Sed/(2*N_SlopePairs) - B_SedPort; Plant_Origin[2]]
sedtankbox1_dim := [L_Sed; 2*B_SedPort; H_Sed/2]
bottomslopes_dim := [L_Sed; W_Sed/N_SlopePairs; H_Sed]
# Pipe Lengths
inletweirpipe_length := H_Sed - H_InletChannel + HW_InletChannel - ElbowRadius(ND_PltWeir) - ConRadius(ND_PltWeir) = 1.22043 m
exitweirpipe_length := H_Sed - H_ExitChannel + H_PltWeir - ElbowRadius(ND_PltWeir) - ConRadius(ND_PltWeir)
sedtankpipe1_length := H_Sed - H_InletChannel - (W_Sed/2*tan(AN_SedBottom) + ElbowRadius(ND_SedPipeEntrance)) - ElbowRadius(ND_SedPipeEntrance)
sedtankpipe5_length := ((5*L_Sed/8 - W_InletChannel/2)^2 + (outerradius(ND_SedLaunder) + 3*(W_Sed/2 - outerradius(ND_SedLaunder))/4)^2)^(1/2) - 2*ElbowRadius(ND_SedPipeEntrance)
sedtankpipe6_length := ((L_Sed/8 - W_InletChannel/2)^2 + (outerradius(ND_SedLaunder) + 1*(W_Sed/2 - outerradius(ND_SedLaunder))/4)^2)^(1/2) - 2*ElbowRadius(ND_SedPipeEntrance)
sedtankpipe7_length := ((3*L_Sed/8 - W_InletChannel/2)^2 + (outerradius(ND_SedLaunder) - 1*(W_Sed/2 - outerradius(ND_SedLaunder))/4)^2)^(1/2) - 2*ElbowRadius(ND_SedPipeEntrance)
sedtankpipe8_length := ((7*L_Sed/8 - W_InletChannel/2)^2 + (outerradius(ND_SedLaunder) - 3*(W_Sed/2 - outerradius(ND_SedLaunder))/4)^2)^(1/2) - 2*ElbowRadius(ND_SedPipeEntrance)
sedtankpipe9_length := W_Sed/2*tan(AN_SedBottom) - ElbowRadius(ND_SedPipeEntrance) - S_SedInlet + ElbowRadius(ND_SedPipeEntrance) = -0.0901393 m
sedtankpipe13_length := HW_Sed - H_SedAbove/2 - 2*ElbowRadius(ND_SedLaunder) - (H_Sed - H_InletChannel - T_Mp)
sedtankpipe14_length := W_InletChannel + T_ChannelWall
manifold_length :=
    length ← L_Sed - W_InletChannel - T_ChannelWall - 2*ElbowRadius(ND_SedLaunder) if sedlayout == 1
    length ← L_Sed - W_InletChannel - T_ChannelWall - W_ExitChannel if sedlayout == 2
    length ← L_Sed - W_InletChannel - T_ChannelWall - W_ExitChannel if sedlayout == 3
    length ← L_Sed - W_ChannelInlet - T_ChannelWall - W_ExitChannel if sedlayout == 4
    return ← length
waste_length := L_Sed
sedtankinletpipe_length := H_Sed - H_InletChannel - outerdiameter(ND_SedSludge) - H_SlopeRectangle
# Pipe Rotation Angles
sedtankpipe5_angle := -(rad/deg)*atan(((5*L_Sed/8 - W_InletChannel/2)/((3*(W_Sed/2 - outerradius(ND_SedLaunder))/4) + outerradius(ND_SedLaunder)))^-1)
sedtankpipe5_angle = -21.0401
sedtankpipe6_angle := -(rad/deg)*((L_Sed/8 - W_InletChannel/2)/(((W_Sed/2 - outerradius(ND_SedLaunder))/4) + outerradius(ND_SedLaunder)))^-1
sedtankpipe6_angle = -53.7649
sedtankpipe7_angle := (rad/deg)*atan(((3*L_Sed/8 - W_InletChannel/2)/(((W_Sed/2 - outerradius(ND_SedLaunder))/4) + outerradius(ND_SedLaunder)))^-1)
sedtankpipe7_angle = 13.8657
sedtankpipe8_angle := (rad/deg)*atan(((7*L_Sed/8 - W_InletChannel/2)/((3*(W_Sed/2 - outerradius(ND_SedLaunder))/4) + outerradius(ND_SedLaunder)))^-1)
sedtankpipe8_angle = 15.1138
# Elbow Origins
sedtankelbow1_origin := [
    Plant_Origin[0] - L_Sed + W_InletChannel/2;
    Plant_Origin[1] + W_Sed/2 + outerradius(ND_SedLaunder) + 3*(W_Sed/2 - outerradius(ND_SedLaunder))/4 - ElbowRadius(ND_SedPipeEntrance);
    Plant_Origin[2] + sedtankpipe9_length + S_SedInlet + 2*ElbowRadius(ND_SedPipeEntrance)
]
sedtankelbow2_origin := [
    Plant_Origin[0] - L_Sed + W_InletChannel/2;
    Plant_Origin[1] + W_Sed/2 + outerradius(ND_SedLaunder) + 1*(W_Sed/2 - outerradius(ND_SedLaunder))/4 - ElbowRadius(ND_SedPipeEntrance);
    Plant_Origin[2] + sedtankpipe9_length + S_SedInlet + 2*ElbowRadius(ND_SedPipeEntrance)
]
sedtankelbow3_origin := [
    Plant_Origin[0] - L_Sed + W_InletChannel/2;
    Plant_Origin[1] + W_Sed/2 - outerradius(ND_SedLaunder) - 1*(W_Sed/2 - outerradius(ND_SedLaunder))/4 - ElbowRadius(ND_SedPipeEntrance);
    Plant_Origin[2] + sedtankpipe9_length + S_SedInlet + 2*ElbowRadius(ND_SedPipeEntrance)
]
sedtankelbow4_origin := [
    Plant_Origin[0] - L_Sed + W_InletChannel/2;
    Plant_Origin[1] + W_Sed/2 - outerradius(ND_SedLaunder) - 3*(W_Sed/2 - outerradius(ND_SedLaunder))/4 - ElbowRadius(ND_SedPipeEntrance);
    Plant_Origin[2] + sedtankpipe9_length + S_SedInlet + 2*ElbowRadius(ND_SedPipeEntrance)
]
sedtankelbow5_origin := [
    Plant_Origin[0] - 7*L_Sed/8 - ElbowRadius(ND_SedPipeEntrance);
    Plant_Origin[1] + W_Sed/2 - ElbowRadius(ND_SedPipeEntrance);
    Plant_Origin[2] + S_SedInlet + sedtankpipe9_length + ElbowRadius(ND_SedPipeEntrance)
]
sedtankelbow6_origin := [
    Plant_Origin[0] - 5*L_Sed/8 - ElbowRadius(ND_SedPipeEntrance);
    Plant_Origin[1] + W_Sed/2 - ElbowRadius(ND_SedPipeEntrance);
    Plant_Origin[2] + S_SedInlet + sedtankpipe9_length + ElbowRadius(ND_SedPipeEntrance)
]
sedtankelbow7_origin := [
    Plant_Origin[0] - 3*L_Sed/8 - ElbowRadius(ND_SedPipeEntrance);
    Plant_Origin[1] + W_Sed/2 - ElbowRadius(ND_SedPipeEntrance);
    Plant_Origin[2] + S_SedInlet + sedtankpipe9_length + ElbowRadius(ND_SedPipeEntrance)
]
sedtankelbow8_origin := [
    Plant_Origin[0] - 1*L_Sed/8 - ElbowRadius(ND_SedPipeEntrance);
    Plant_Origin[1] + W_Sed/2 - ElbowRadius(ND_SedPipeEntrance);
    Plant_Origin[2] + S_SedInlet + sedtankpipe9_length + ElbowRadius(ND_SedPipeEntrance)
]
sedtankelbow9_origin := [
    Plant_Origin[0] - L_Sed + W_InletChannel + T_ChannelWall + ElbowRadius(ND_SedLaunder);
    Plant_Origin[1] + W_Sed/2 - ElbowRadius(ND_SedLaunder);
    Plant_Origin[2] + HW_Sed - H_SedAbove/2 - ElbowRadius(ND_SedLaunder)
]
sedtankelbow10_origin := [
    Plant_Origin[0] - L_Sed + W_InletChannel + T_ChannelWall;
    Plant_Origin[1] + W_Sed/2 - ElbowRadius(ND_SedLaunder);
    Plant_Origin[2] + H_Sed - H_InletChannel - T_Mp
]
# Sedtank Scripts
Sedtanktankscript :=
    viewtops ← viewtop1
    layer1 ← layer_new("tank", grey)
    tank1 ← Tank(Plant_Origin, [L_Sed; W_Sed; H_Sed], T_PlantWall)
    boxt ← box(Plant_Origin, sedbottombox_dim)
    uniont ← union_allA
    layerset ← layer_set("0")
    layerfreeze1 ← layer_freeze("tank")
    one ← stack(viewtops, layer1, tank1, boxt, uniont, layerset, layerfreeze1)
    return one
Sedtankslopescript :=
    layerslopes ← layer_new("slopes", ltgrey)
    slopes ← sedslope(SedSlopes_Origin, [L_Sed; W_Sed; H_Sed], AN_SedBottom)
    tankthaw ← layer_thaw("tank")
    bigunion ← union_allA
    box1 ← box(sedtankbox1_origin, [
        sedtankbox1_origin[0] + sedtankbox1_dim[0];
        sedtankbox1_origin[1] + sedtankbox1_dim[1];
        sedtankbox1_origin[2] + sedtankbox1_dim[2]
    ])
    tankthaw ← layer_thaw("tank")
    subtractbox ← subtractJ(Plant_Origin, [Plant_Origin[0]; Plant_Origin[1] + W_Sed; Plant_Origin[2]], [Plant_Origin[0]; Plant_Origin[1] - T_PlantWall; Plant_Origin[2]], sedtankbox1_origin)
    layerset ← layer_set("0")
    layerfreezeslope ← layer_freeze("slopes")
    one ← stack(layerslopes, slopes, tankthaw, bigunion, box1, concat(viewtop, subtractbox), layerset, layerfreezeslope)
    return one
Sedtankinletslopescript :=
    layerslopes2 ← layer_new("inletslopes", ltgrey)
    inletslopes ← Inletslopetrapezoid(inletslopes_origin, L_Sed, W_Sed/N_SlopePairs, W_SedPort, H_SedPort, B_SedPort, T_SedInletSlope, N_SedPorts, AN_SedTopInlet, AN_SedBottom, H_SlopeRectangle)
    box1 ← box(sedtankbox1_origin + [-zc; 0; 0], [
        sedtankbox1_origin[0] + sedtankbox1_dim[0] + zc;
        sedtankbox1_origin[1] + sedtankbox1_dim[1];
        sedtankbox1_origin[2] + sedtankbox1_dim[2]
    ])
    subtractbox ← subtractD(Plant_Origin, sedtankbox1_origin)
    arrayis ← array_all(N_SlopePairs, 1, W_Sed/N_SlopePairs)
    layerset ← layer_set("0")
    layerfreezeinslope ← layer_freeze("inletslopes")
    layerslopes ← layer_new("slopes", ltgrey)
    slopes ← sedslope(Plant_Origin, bottomslopes_dim, AN_SedBottom)
    moves ← move_all(Plant_Origin, [Plant_Origin[0]; Plant_Origin[1]; Plant_Origin[2] + outerdiameter(ND_SedSludge)])
    inletslopesridge ← Inletslope(inletslopes_origin, L_Sed, L_SedTopInlet + (T_SedInletSlope*tan(AN_SedTopInlet)), L_SedSlopeInlets, L_SedTopInlet, T_SedInletSlope, N_SedSlopeInlets, AN_SedTopInlet)
    tankthaw ← layer_thaw("tank")
    bigunion ← union_allA
    box2 ← box(sedtankbox1_origin, [
        sedtankbox1_origin[0] + sedtankbox1_dim[0];
        sedtankbox1_origin[1] + sedtankbox1_dim[1];
        sedtankbox1_origin[2] + sedtankbox1_dim[2]
    ])
    arraybox ← arrayB(sedtankbox1_origin, N_SlopePairs, 1, W_Sed/N_SlopePairs)
    subtractbox2 ← subtractH(Plant_Origin, [Plant_Origin[0] - L_Sed/4; Plant_Origin[1] + W_Sed/8; Plant_Origin[2]], [Plant_Origin[0] - L_Sed/2; Plant_Origin[1] + 7*W_Sed/8; Plant_Origin[2]])
    layerfreezeslope ← layer_freeze("slopes")
    one ← stack(layerslopes2, inletslopes, box1, concat(viewtop, subtractbox), arrayis, bigunion, layerset, layerfreezeinslope, layerslopes, slopes, moves, inletslopesridge, arrayis, tankthaw, bigunion, box2, arraybox, concat(viewtop, subtractbox2), layerset, layerfreezeslope)
    return one
Sedtankexitchannelscript :=
    layer2 ← layer_new("echannel", ltgrey)
    channel1 ← ChannelDrawing(echannel_origin, [W_Sed + 2*T_PlantWall; W_ExitChannel; H_ExitChannel], T_ChannelWall)
    rotate1 ← rotate(echannel_origin, 90)
    bigunion ← union_allA
    layerset ← layer_set("0")
    layerfreeze2 ← layer_freeze("echannel")
    one ← stack(layer2, channel1, rotate1, bigunion, layerset, layerfreeze2)
    return ← one
Sedtankinletchannelscript :=
    layer2 ← layer_new("channel", ltgrey)
    channel1 ← ChannelDrawing(channel_origin, [W_Sed + 2*T_PlantWall; W_InletChannel; H_InletChannel], T_ChannelWall)
    rotate1 ← rotate(channel_origin, 90)
    box1 ← box(channelinletwall_origin, channelinletwall_origin + channelinletwall_dim)
    bigunion ← union_allA
    box2 ← box(channelinletbox1_origin, channelinletbox1_origin + channelinletbox1_dim)
    subtract2 ← subtractD(Plant_Origin, channelinletbox1_origin)
    box3 ← box(channelinletbox2_origin, channelinletbox2_origin + channelinletbox2_dim)
    subtract3 ← subtractD(Plant_Origin, channelinletbox2_origin)
    layerset ← layer_set("0")
    viewtops ← viewtop1
    layerfreeze2 ← layer_freeze("channel")
    one ← stack(layer2, channel1, rotate1, bigunion, layerset, viewtops, layerfreeze2) if sedlayout == 1
    one ← stack(layer2, channel1, rotate1, bigunion, layerset, layerfreeze2) if sedlayout == 2
    one ← stack(layer2, channel1, rotate1, bigunion, layerset, layerfreeze2) if sedlayout == 3
    one ← stack(layer2, channel1, rotate1, box1, bigunion, viewtops, box2, subtract2, box3, subtract3, layerset, viewtops, layerfreeze2) if sedlayout == 4
    return ← one
Sedtankinletpipescriptlayout1 :=
    viewtops ← viewtop1
    layerthawc ← layer_thaw("channel")
    layersetc ← layer_set("channel")
    cylinder1 ← cylinderA(sedtankpipe1_origin, outerradius(ND_SedPipeEntrance), -T_ChannelWall)
    cylinder2 ← cylinderA(sedtankpipe2_origin, outerradius(ND_SedPipeEntrance), -T_ChannelWall)
    cylinder3 ← cylinderC(sedtankpipe3_origin, outerradius(ND_SedPipeEntrance), -T_ChannelWall)
    cylinder4 ← cylinderA(sedtankpipe4_origin, outerradius(ND_SedPipeEntrance), -T_ChannelWall)
    subtract1 ← subtractH(channel_origin, [
        sedtankpipe1_origin[0] + outerradius(ND_SedPipeEntrance);
        sedtankpipe1_origin[1] + outerradius(ND_SedPipeEntrance);
        sedtankpipe1_origin[2]
    ], [
        sedtankpipe4_origin[0] - outerradius(ND_SedPipeEntrance);
        sedtankpipe4_origin[1] - outerradius(ND_SedPipeEntrance);
        sedtankpipe4_origin[2]
    ])
    holes2 ← concat(cylinder1, cylinder2, cylinder3)
    holes3 ← concat(cylinder4, subtract1)
    layerset ← layer_set("0")
    layerfreezec ← layer_freeze("channel")
    layer3 ← layer_new("pipe", blue)
    pipe1 ← Pipe(sedtankpipe1_origin, ND_SedPipeEntrance, -sedtankpipe1_length, EN_PipeSpec)
    pipe2 ← Pipe(sedtankpipe2_origin, ND_SedPipeEntrance, -sedtankpipe1_length, EN_PipeSpec)
    pipe3 ← Pipe(sedtankpipe3_origin, ND_SedPipeEntrance, -sedtankpipe1_length, EN_PipeSpec)
    pipe4 ← Pipe(sedtankpipe4_origin, ND_SedPipeEntrance, -sedtankpipe1_length, EN_PipeSpec)
    pipe5 ← Pipe(sedtankpipe5_origin, ND_SedPipeEntrance, sedtankpipe5_length, EN_PipeSpec)
    rotatepipe5 ← rotate_3d([
        sedtankpipe5_origin[0] + innerD(ND_SedPipeEntrance, EN_PipeSpec)/2;
        sedtankpipe5_origin[1];
        sedtankpipe5_origin[2]
    ], sedtankpipe5_origin, "y", 90)
    rotate2a ← rotate_3d([
        sedtankpipe5_origin[0];
        sedtankpipe5_origin[1] + innerD(ND_SedPipeEntrance, EN_PipeSpec)/2;
        sedtankpipe5_origin[2] + innerD(ND_SedPipeEntrance, EN_PipeSpec)/2
    ], sedtankpipe1_origin, "z", sedtankpipe5_angle)
    pipe6 ← Pipe(sedtankpipe6_origin, ND_SedPipeEntrance, sedtankpipe6_length, EN_PipeSpec)
    rotate3 ← rotate_3d([
        sedtankpipe6_origin[0] + innerD(ND_SedPipeEntrance, EN_PipeSpec)/2;
        sedtankpipe6_origin[1];
        sedtankpipe6_origin[2]
    ], sedtankpipe6_origin, "y", 90)
    rotate3a ← rotate_3d([
        sedtankpipe6_origin[0];
        sedtankpipe6_origin[1] + innerD(ND_SedPipeEntrance, EN_PipeSpec)/2;
        sedtankpipe6_origin[2] + innerD(ND_SedPipeEntrance, EN_PipeSpec)/2
    ], sedtankpipe2_origin, "z", sedtankpipe6_angle)
    pipe7 ← Pipe(sedtankpipe7_origin, ND_SedPipeEntrance, sedtankpipe7_length, EN_PipeSpec)
    rotate4 ← rotate_3d([
        sedtankpipe7_origin[0] + innerD(ND_SedPipeEntrance, EN_PipeSpec)/2;
        sedtankpipe7_origin[1];
        sedtankpipe7_origin[2]
    ], sedtankpipe7_origin, "y", 90)
    rotate4a ← rotate_3d([
        sedtankpipe7_origin[0];
        sedtankpipe7_origin[1] + innerD(ND_SedPipeEntrance, EN_PipeSpec)/2;
        sedtankpipe7_origin[2] + innerD(ND_SedPipeEntrance, EN_PipeSpec)/2
    ], sedtankpipe3_origin, "z", sedtankpipe7_angle)
    pipe8 ← Pipe(sedtankpipe8_origin, ND_SedPipeEntrance, sedtankpipe8_length, EN_PipeSpec)
    rotate5 ← rotate_3d([
        sedtankpipe8_origin[0] + innerD(ND_SedPipeEntrance, EN_PipeSpec)/2;
        sedtankpipe8_origin[1];
        sedtankpipe8_origin[2]
    ], sedtankpipe8_origin, "y", 90)
    rotate5a ← rotate_3d([
        sedtankpipe8_origin[0];
        sedtankpipe8_origin[1] + innerD(ND_SedPipeEntrance, EN_PipeSpec)/2;
        sedtankpipe8_origin[2] + innerD(ND_SedPipeEntrance, EN_PipeSpec)/2
    ], sedtankpipe4_origin, "z", sedtankpipe8_angle)
    pipe9 ← Pipe(sedtankpipe9_origin, ND_SedPipeEntrance, sedtankpipe9_length, EN_PipeSpec)
    pipe10 ← Pipe(sedtankpipe10_origin, ND_SedPipeEntrance, sedtankpipe9_length, EN_PipeSpec)
    pipe11 ← Pipe(sedtankpipe11_origin, ND_SedPipeEntrance, sedtankpipe9_length, EN_PipeSpec)
    pipe12 ← Pipe(sedtankpipe12_origin, ND_SedPipeEntrance, sedtankpipe9_length, EN_PipeSpec)
    layerfreeze2 ← layer_freeze("pipe")
    cylinder5 ← cylinderA(sedtankpipe14_origin, outerradius(ND_SedLaunder), -T_PlantWall)
    rotate2 ← rotate_3d([
        sedtankpipe14_origin[0] + outerradius(ND_SedLaunder);
        sedtankpipe14_origin[1];
        sedtankpipe14_origin[2]
    ], sedtankpipe14_origin, "y", 90)
    subtract2 ← subtractD(Plant_Origin, [
        sedtankpipe14_origin[0];
        sedtankpipe14_origin[1] + outerradius(ND_SedLaunder);
        sedtankpipe1_origin[2]
    ])
    holes1 ← concat(cylinder5, rotate2)
    layerthawp ← layer_thaw("pipe")
    layersetp ← layer_set("pipe")
    pipe13 ← Pipe(sedtankpipe13_origin, ND_SedLaunder, sedtankpipe13_length, EN_PipeSpec)
    pipe14 ← Pipe(sedtankpipe14_origin, ND_SedLaunder, sedtankpipe14_length, EN_PipeSpec)
    rotate6 ← rotate_3d([
        sedtankpipe14_origin[0] + innerD(ND_SedLaunder, EN_PipeSpec)/2;
        sedtankpipe14_origin[1];
        sedtankpipe14_origin[2]
    ], sedtankpipe14_origin, "y", 90)
    layerfreeze3 ← layer_freeze("pipe")
    one ← stack(viewtops, layerthawc, layersetc, holes2, holes3, layerset, layerfreezec, layer3, pipe1, pipe2, pipe3, pipe4, pipe5, rotatepipe5, rotate2a, pipe6, rotate3, rotate3a)
    two ← stack(viewtops, pipe7, rotate4, rotate4a, pipe8, rotate5, rotate5a, pipe9, pipe10, pipe11, pipe12, layerthawc, layersetc, layerfreeze2, viewtops, holes1, subtract2, layerthawp, layersetp, layerfreezec)
    three ← stack(viewtops, pipe13, pipe14, rotate6, layerset, layerfreeze3)
    return stack(one, two, three)
# pipe2_origin | pipe3_origin | pipe11_origin | pipe14_origin | pipe6_1ength | pipe7_length | pipe8_length | pipe13_length | pipe14_length
# pipe4_origin | pipe5_origin | pipe8_origin | pipe5_1ength
# pipe6_origin | pipe7_origin | pipe9_origin | pipe10_origin | pipe12_origin | pipe13_origin | pipe1_length
Sedtankinletpipescript :=
    layerthawc ← layer_thaw("channel")
    viewtop ← viewtop1
    cylinder1 ← cylinderC(sedtankinletpipe1_origin, outerradius(ND_SedPipeEntrance), -sedtankinletpipe_length)
    arrayc ← arrayB([
        sedtankinletpipe1_origin[0] + outerradius(ND_SedPipeEntrance);
        sedtankinletpipe1_origin[1];
        sedtankinletpipe1_origin[2]
    ], N_SedInletPipes*N_SlopePairs, 1, W_Sed/(N_SedInletPipes*N_SlopePairs))
    subtractc ← subtractH(channel_origin, [
        sedtankinletpipe1_origin[0] + outerradius(ND_SedPipeEntrance);
        Plant_Origin[1] + W_Sed - W_Sed/(2*N_SedInletPipes*N_SlopePairs) + outerradius(ND_SedPipeEntrance);
        sedtankpipe1_origin[2]
    ], [
        sedtankinletpipe1_origin[0] - outerradius(ND_SedPipeEntrance);
        Plant_Origin[1] + W_Sed/(2*N_SedInletPipes*N_SlopePairs) - outerradius(ND_SedPipeEntrance);
        sedtankpipe1_origin[2]
    ])
    layerset ← layer_set("0")
    layerfreezec ← layer_freeze("channel")
    layerthawis ← layer_thaw("inletslopes")
    subtractis ← subtractH(Plant_Origin, [
        sedtankinletpipe1_origin[0] + 2*outerradius(ND_SedPipeEntrance);
        Plant_Origin[1] + W_Sed - W_Sed/(2*N_SedInletPipes*N_SlopePairs);
        sedtankpipe1_origin[2]
    ], [
        sedtankinletpipe1_origin[0] - 2*outerradius(ND_SedPipeEntrance);
        Plant_Origin[1] + W_Sed/(2*N_SedInletPipes*N_SlopePairs);
        sedtankpipe1_origin[2]
    ])
    layerfreezeis ← layer_freeze("inletslopes")
    layernewip ← layer_new("inletpipes", blue)
    slopesip ← sedslope([
        Plant_Origin[0] - 2*outerdiameter(ND_SedSludge);
        Plant_Origin[1];
        Plant_Origin[2] + H_SlopeRectangle + outerdiameter(ND_SedSludge)
    ], bottomslopes_dim, AN_SedTopInlet)
    pipe1 ← Pipe(sedtankinletpipe1_origin, ND_SedPipeEntrance, -sedtankinletpipe_length, EN_PipeSpec)
    arrayp ← arrayB([
        sedtankinletpipe1_origin[0] + outerradius(ND_SedPipeEntrance);
        sedtankinletpipe1_origin[1];
        sedtankinletpipe1_origin[2]
    ], N_SedInletPipes, 1, W_Sed/(N_SedInletPipes*N_SlopePairs))
    subtractip ← subtractK([
        sedtankinletpipe1_origin[0] - 2*outerradius(ND_SedPipeEntrance);
        Plant_Origin[1] + W_Sed;
        sedtankpipe1_origin[2]
    ], [
        sedtankinletpipe1_origin[0] + 2*outerradius(ND_SedPipeEntrance);
        Plant_Origin[1];
        sedtankpipe1_origin[2]
    ], Plant_Origin)
    arrayp2 ← array_all(N_SlopePairs, 1, W_Sed/N_SlopePairs)
    layerfreezeip ← layer_freeze("inletpipes")
    one ← stack(layerthawc, viewtop, cylinder1, arrayc, viewtop, subtractc, layerset, layerfreezec, layerthawis, cylinder1, arrayc, viewtop, subtractis, layerset, layerfreezeis, layernewip, slopesip, pipe1, arrayp, viewtop, subtractip, arrayp2, layerset, layerfreezeip)
    return one
    = [
        "-layer t channel"; "  "; "_-view o t"; "_cylinder -3.4915,0.26987,0.96 0.10954 -0.7911"; "-array -3.38196,0.26987,0.96  R 4 1 0.53975"; "_-view o t"; "_subtract -3.362,-0.15,0.96  -3.38196,1.99866,0.96 -3.60104,0.16034,0.96 "; "-layer s 0"; "  "; "-layer f channel"
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    ]
Sedtankelbowscript :=
    layer4 ← layer_new("elbow", green)
    elbow1 ← elbow(sedtankelbow1_origin, ND_SedPipeEntrance, EN_PipeSpec)
    rotate6 ← rotate_3d([
        sedtankelbow1_origin[0];
        sedtankelbow1_origin[1] + ElbowRadius(ND_SedPipeEntrance);
        sedtankelbow1_origin[2] + innerD(ND_SedPipeEntrance, EN_PipeSpec)/2
    ], [
        sedtankelbow1_origin[0];
        sedtankelbow1_origin[1] + ElbowRadius(ND_SedPipeEntrance);
        sedtankelbow1_origin[2]
    ], "x", -90)
    rotate7 ← rotate_3d([
        sedtankelbow1_origin[0];
        sedtankelbow1_origin[1] + ElbowRadius(ND_SedPipeEntrance);
        sedtankelbow1_origin[2] + innerD(ND_SedPipeEntrance, EN_PipeSpec)/2
    ], [
        sedtankelbow1_origin[0];
        sedtankelbow1_origin[1] + ElbowRadius(ND_SedPipeEntrance);
        sedtankelbow1_origin[2]
    ], "y", 90)
    copy1 ← copyDa([
        sedtankpipe5_origin[0];
        sedtankpipe5_origin[1];
        sedtankpipe5_origin[2] - outerradius(ND_SedPipeEntrance)
    ], sedtankpipe5_origin, sedtankpipe6_origin, sedtankpipe7_origin, sedtankpipe8_origin)
    rotate8 ← rotate_3d([
        sedtankpipe5_origin[0];
        sedtankpipe5_origin[1];
        sedtankpipe5_origin[2] - outerradius(ND_SedPipeEntrance)
    ], sedtankpipe1_origin, "z", sedtankpipe5_angle)
    rotate9 ← rotate_3d([
        sedtankpipe6_origin[0];
        sedtankpipe6_origin[1];
        sedtankpipe6_origin[2] - outerradius(ND_SedPipeEntrance)
    ], sedtankpipe2_origin, "z", sedtankpipe6_angle)
    rotate10 ← rotate_3d([
        sedtankpipe7_origin[0];
        sedtankpipe7_origin[1];
        sedtankpipe7_origin[2] - outerradius(ND_SedPipeEntrance)
    ], sedtankpipe3_origin, "z", sedtankpipe7_angle)
    rotate11 ← rotate_3d([
        sedtankpipe8_origin[0];
        sedtankpipe8_origin[1];
        sedtankpipe8_origin[2] - outerradius(ND_SedPipeEntrance)
    ], sedtankpipe4_origin, "z", sedtankpipe8_angle)
    layerset ← layer_set("0")
    layerfreeze4 ← layer_freeze("elbow")
    layer5 ← layer_new("elbowa", green)
    elbow5 ← elbow(sedtankelbow5_origin, ND_SedPipeEntrance, EN_PipeSpec)
    rotate14 ← rotate_3d([
        sedtankelbow5_origin[0];
        sedtankelbow5_origin[1] + ElbowRadius(ND_SedPipeEntrance);
        sedtankelbow5_origin[2] + innerD(ND_SedPipeEntrance, EN_PipeSpec)/2
    ], [
        sedtankelbow5_origin[0];
        sedtankelbow5_origin[1] + ElbowRadius(ND_SedPipeEntrance);
        sedtankelbow5_origin[2]
    ], "x", 90)
    copy2 ← copyDa([
        sedtankpipe9_origin[0] - ElbowRadius(ND_SedPipeEntrance);
        sedtankpipe9_origin[1];
        sedtankpipe9_origin[2]
    ], sedtankelbow5_origin, sedtankelbow6_origin, sedtankelbow7_origin, sedtankelbow8_origin)
    rotate15 ← rotate_3d([
        sedtankpipe9_origin[0];
        sedtankpipe9_origin[1] - outerradius(ND_SedPipeEntrance);
        sedtankpipe9_origin[2]
    ], sedtankpipe9_origin, "z", sedtankpipe6_angle)
    rotate16 ← rotate_3d([
        sedtankpipe10_origin[0];
        sedtankpipe10_origin[1] - outerradius(ND_SedPipeEntrance);
        sedtankpipe10_origin[2]
    ], sedtankpipe10_origin, "z", sedtankpipe7_angle)
    rotate17 ← rotate_3d([
        sedtankpipe11_origin[0];
        sedtankpipe11_origin[1] - outerradius(ND_SedPipeEntrance);
        sedtankpipe11_origin[2]
    ], sedtankpipe11_origin, "z", sedtankpipe5_angle)
    rotate18 ← rotate_3d([
        sedtankpipe12_origin[0];
        sedtankpipe12_origin[1] - outerradius(ND_SedPipeEntrance);
        sedtankpipe12_origin[2]
    ], sedtankpipe12_origin, "z", sedtankpipe8_angle)
    layerset ← layer_set("0")
    layerfreeze5 ← layer_freeze("elbowa")
    layer6 ← layer_new("elbowb", green)
    elbow9 ← elbow(sedtankelbow9_origin, ND_SedLaunder, EN_PipeSpec)
    rotate19 ← rotate_3d([
        sedtankelbow9_origin[0];
        sedtankelbow9_origin[1] + ElbowRadius(ND_SedLaunder);
        sedtankelbow9_origin[2] + innerD(ND_SedLaunder, EN_PipeSpec)/2
    ], [
        sedtankelbow9_origin[0];
        sedtankelbow9_origin[1] + ElbowRadius(ND_SedLaunder);
        sedtankelbow9_origin[2]
    ], "z", 90)
    rotate20 ← rotate_3d([
        sedtankelbow9_origin[0];
        sedtankelbow9_origin[1] + ElbowRadius(ND_SedLaunder);
        sedtankelbow9_origin[2] + innerD(ND_SedPipeEntrance, EN_PipeSpec)/2
    ], [
        sedtankelbow9_origin[0];
        sedtankelbow9_origin[1] + ElbowRadius(ND_SedLaunder);
        sedtankelbow9_origin[2]
    ], "x", 90)
    elbow10 ← elbow(sedtankelbow10_origin, ND_SedLaunder, EN_PipeSpec)
    rotate21 ← rotate_3d([
        sedtankelbow10_origin[0];
        sedtankelbow10_origin[1] + ElbowRadius(ND_SedLaunder);
        sedtankelbow10_origin[2] + innerD(ND_SedPipeEntrance, EN_PipeSpec)/2
    ], [
        sedtankelbow10_origin[0];
        sedtankelbow10_origin[1] + ElbowRadius(ND_SedLaunder);
        sedtankelbow10_origin[2]
    ], "x", -90)
    layerset ← layer_set("0")
    layerfreeze6 ← layer_freeze("elbowb")
    one ← stack(layer4, elbow1, rotate6, rotate7, copy1, viewtop1, rotate8, rotate9, rotate10, rotate11, layerset, layerfreeze4)
    two ← stack(layer5, elbow5, rotate14, copy2, viewtop1, rotate15, rotate16, rotate17, rotate18, layerset, layerfreeze5)
    three ← stack(layer6, elbow9, rotate19, rotate20, elbow10, rotate21, layerset, layerfreeze6)
    return stack(one, two, three)
Sedtankmanifoldscript :=
    layer5 ← layer_new("manifold", blue2)
    manifold1 ← Manifold(manifold_origin, ND_SedLaunder, D_SedLaunderOrifice/2, manifold_length, B_SedLaunderOrifices, EN_PipeSpec)
    rotate18 ← rotate_3d([manifold_origin[0] + innerD(ND_SedLaunder, EN_PipeSpec)/2; manifold_origin[1]; manifold_origin[2]], manifold_origin, "y", 90)
    rotate19 ← rotate_3d([manifold_origin[0]; manifold_origin[1] + innerD(ND_SedLaunder, EN_PipeSpec)/2; manifold_origin[2]], manifold_origin, "x", -60)
    arraym ← array_all(N_SedLaunders, 1, W_Sed/N_SedLaunders)
    layerset ← layer_set("0")
    layerfreeze5 ← layer_freeze("manifold")
    one ← stack(layer5, manifold1, rotate18, rotate19, layerset, layerfreeze5) if sedlayout == 1
    one ← stack(layer5, manifold1, rotate18, rotate19, arraym, layerset, layerfreeze5) if sedlayout == 2
    one ← stack(layer5, manifold1, rotate18, rotate19, arraym, layerset, layerfreeze5) if sedlayout == 3
    one ← stack(layer5, manifold1, rotate18, rotate19, arraym, layerset, layerfreeze5) if sedlayout == 4
    return one
Sedtanksludgescript :=
    layer6 ← layer_new("sludgepipe", blue3)
    sludgepipe1 ← Sludgepipe(waste_origin, ND_SedSludge, L_Sed, D_SedSludgeOrifice/2, B_SedSludgeOrifices, EN_PipeSpec)
    rotate20 ← rotate_3d([waste_origin[0] + innerD(ND_SedSludge, EN_PipeSpec)/2; waste_origin[1]; waste_origin[2]], waste_origin, "y", 90)
    rotate21 ← rotate_3d([waste_origin[0]; waste_origin[1] + innerD(ND_SedSludge, EN_PipeSpec)/2; waste_origin[2]], waste_origin, "x", 90)
    arrays ← array_all(N_SlopePairs, 1, W_Sed/N_SlopePairs)
    layerset ← layer_set("0")
    layerfreeze6 ← layer_freeze("sludgepipe")
    one ← stack(layer6, sludgepipe1, rotate20, rotate21, arrays, layerset, layerfreeze6)
    return one
Sedtanklaminascript :=
    layer7 ← layer_new("lamina", purple)
    lamina1 ← lamina(lamina_origin, Amp_SedPlate, W_Sed/N_SlopePairs, L_SedPlate, T_SedPlate, Per_SedPlate, AN_SedPlate, N_SedPlates, N_SedPlateCol, -B_SedPlateHorizontal, Y_SedPlate) if Baffle_complex == 1
    lamina1 ← laminaplain1(lamina_origin, W_Sed/N_SlopePairs, L_SedPlate, T_SedPlate, AN_SedPlate, N_SedPlates, N_SedPlateCol, -B_SedPlateHorizontal) otherwise
    arrayl ← array_all(N_SlopePairs, 1, W_Sed/N_SlopePairs)
    layerset ← layer_set("0")
    layerfreeze7 ← layer_freeze("lamina")
    one ← stack(layer7, lamina1, arrayl, layerset, layerfreeze7)
    return one
Sedtankarrayscript :=
    layerthaw1 ← layer_thaw("slopes")
    layerthaw2 ← layer_thaw("channel")
    layerthaw2e ← layer_thaw("echannel")
    layerthaw3 ← layer_thaw("pipe")
    layerthaw4 ← layer_thaw("elbow")
    layerthaw4a ← layer_thaw("elbowa")
    layerthaw4b ← layer_thaw("elbowb")
    layerthaw5 ← layer_thaw("manifold")
    layerthaw6 ← layer_thaw("sludgepipe")
    layerthaw7 ← layer_thaw("lamina")
    layerthaw8 ← layer_thaw("inletpipes")
    layerthaw8is ← layer_thaw("inletslopes")
    viewtop ← viewtop1
    arraytank1 ← concat("-array", sp, "ALL", sp, sp, "r", sp, stringit_nounits(N_SedTanks), sp, "1", sp, stringit(W_Sed + T_PlantWall))
    layerfreeze7 ← layer_freeze("pipe")
    layerfreeze8 ← layer_freeze("elbow")
    layerfreeze8a ← layer_freeze("elbowa")
    layerfreeze8b ← layer_freeze("elbowb")
    layerfreeze9 ← layer_freeze("sludgepipe")
    layerfreeze10 ← layer_freeze("manifold")
    layerfreeze12 ← layer_freeze("lamina")
    layerfreeze13 ← layer_freeze("inletpipes")
    layerfreeze14 ← layer_freeze("channel")
    layerfreeze15 ← layer_freeze("echannel")
    layerfreeze15is ← layer_freeze("inletslopes")
    bigunion ← union_allA
    layerset ← layer_set("0")
    layerfreeze16 ← layer_freeze("slopes")
    one ← stack(layerthaw1, layerthaw2, layerthaw2e, layerthaw3, layerthaw4, layerthaw4a, layerthaw4b, layerthaw5, layerthaw6, layerthaw7, layerthaw8, layerthaw8is)
    two ← stack(viewtop, arraytank1, layerfreeze7, layerfreeze8, layerfreeze8a, layerfreeze8b, layerfreeze9, layerfreeze10, layerfreeze12, layerfreeze13)
    three ← stack(layerfreeze14, layerfreeze15, layerfreeze15is, bigunion, layerset, layerfreeze16, layerthaw2, bigunion, layerset, layerfreeze14, layerthaw2e, bigunion, layerset, layerfreeze15)
    return stack(one, two, three)
Sedtankopenchannelscript :=
    layerthawtank ← layer_thaw("slopes")
    viewtop ← viewtop1
    box1 ← box(channelbox_origin, [
        channelbox_origin[0] + channelbox_dim[0];
        channelbox_origin[1] + channelbox_dim[1];
        channelbox_origin[2] + channelbox_dim[2]
    ])
    subtract1 ← subtractD(Plant_Origin, channelbox_origin)
    box2 ← box(echannelbox_origin, [
        echannelbox_origin[0] + echannelbox_dim[0];
        echannelbox_origin[1] + echannelbox_dim[1];
        echannelbox_origin[2] + echannelbox_dim[2]
    ])
    subtract2 ← subtractD([Plant_Origin[0] + T_PlantWall; Plant_Origin[1]; Plant_Origin[2]], echannelbox_origin)
    layerset1 ← layer_set("channel")
    box3 ← box(channelclosebox_origin, channelclosebox_origin + channelclosebox_dim)
    bigunion ← union_allA
    layerset ← layer_set("0")
    layerfreezech ← layer_freeze("channel")
    layerfreezetank ← layer_freeze("slopes")
    one ← stack(layerthawtank, viewtop, box1, viewtop, subtract1, layerset, layerfreezetank) if sedlayout == 1
    one ← stack(layerthawtank, viewtop, box1, viewtop, subtract1, viewtop, box2, viewtop, subtract2, layerset, layerfreezetank) if sedlayout == 2
    one ← stack(layerthawtank, viewtop, box1, viewtop, subtract1, viewtop, box2, viewtop, subtract2, layerset, layerfreezetank) if sedlayout == 3
    one ← stack(layerthawtank, viewtop, box2, viewtop, subtract2, layerset1, layerfreezetank, box3, bigunion, layerset, layerfreezech) if sedlayout == 4
    return one
sedechanneltankscript :=
    viewtope ← viewtop1
    layernewect ← layer_new("echanneltank", ltgrey)
    tankect ← Tank(echanneltank_origin, echanneltank_dim, T_PlantWall)
    boxectb ← box(echanneltank_origin, echanneltank_origin + echanneltankbox_dim)
    bigunion ← union_allA
    boxect ← box(echannelbox_origin, echannelbox_origin + echannelbox_dim)
    subtractect ← subtractD(echanneltank_origin, echannelbox_origin)
    layerset ← layer_set("0")
    layerfreezeect ← layer_freeze("echanneltank")
    layernewewe ← layer_new("exitweirelbow", green)
    elbowewe ← elbow(sedtankexitweirelbow_origin, ND_PltWeir, EN_PipeSpec)
    rotateewe1 ← rotate_3d([
        sedtankexitweirelbow_origin[0] + ElbowRadius(ND_PltWeir);
        sedtankexitweirelbow_origin[1];
        sedtankexitweirelbow_origin[2] - outerradius(ND_PltWeir)
    ], sedtankexitweirelbow_origin, "y", 90)
    rotateewe2 ← rotate_3d([
        sedtankexitweirelbow_origin[0];
        sedtankexitweirelbow_origin[1] + ElbowRadius(ND_PltWeir) - outerradius(ND_PltWeir);
        sedtankexitweirelbow_origin[2]
    ], sedtankexitweirelbow_origin, "z", 90)
    copyewe ← copyB(exitweirelbowcopy1_point, exitweirelbowcopy1_point, exitweirelbowcopy2_point)
    layerfreezeewe ← layer_freeze("exitweirelbow")
    layernewewp ← layer_new("exitweir", blue)
    pipeewp ← Pipe(exitweirpipe_origin, ND_PltWeir, exitweirpipe_length, EN_PipeSpec)
    copyewp ← copyB(exitweirpipecopy1_point, exitweirpipecopy1_point, exitweirpipecopy2_point)
    layerfreezeewp ← layer_freeze("exitweir")
    one ← stack(viewtope, layernewect, tankect, boxectb, bigunion, boxect, subtractect, layerset, layerfreezeect, layernewewe, elbowewe, rotateewe1, rotateewe2, copyewe, layerset, layerfreezeewe, layernewewp, pipeewp, copyewp, layerset, layerfreezeewp)
    return one
sedichanneltankscript :=
    viewtopi ← viewtop1
    layernewict ← layer_new("ichanneltank", ltgrey)
    tankict ← Tank(ichanneltank_origin, ichanneltank_dim, T_PlantWall)
    boxictb ← box(ichanneltank_origin, ichanneltank_origin + ichanneltankbox_dim)
    bigunion ← union_allA
    boxict ← box(channelbox_origin, channelbox_origin + channelbox_dim)
    subtractict ← subtractD(ichanneltank_origin, channelbox_origin)
    layerset ← layer_set("0")
    layerfreezeict ← layer_freeze("ichanneltank")
    layernewiwe ← layer_new("inletweirelbow", green)
    elbowiwe ← elbow(sedtankinletweirelbow_origin, ND_PltWeir, EN_PipeSpec)
    rotateiwe1 ← rotate_3d([
        sedtankinletweirelbow_origin[0] + ElbowRadius(ND_PltWeir);
        sedtankinletweirelbow_origin[1];
        sedtankinletweirelbow_origin[2] - outerradius(ND_PltWeir)
    ], sedtankinletweirelbow_origin, "y", 90)
    rotateiwe2 ← rotate_3d([
        sedtankinletweirelbow_origin[0];
        sedtankinletweirelbow_origin[1] + ElbowRadius(ND_PltWeir) - outerradius(ND_PltWeir);
        sedtankinletweirelbow_origin[2]
    ], sedtankinletweirelbow_origin, "z", 90)
    layerfreezeiwe ← layer_freeze("inletweirelbow")
    layernewiwp ← layer_new("inletweir", blue)
    pipeiwp ← Pipe(inletweirpipe_origin, ND_PltWeir, inletweirpipe_length, EN_PipeSpec)
    layerfreezeiwp ← layer_freeze("inletweir")
    one ← stack(viewtopi, layernewict, tankict, boxictb, bigunion, boxict, subtractict, layerset, layerfreezeict, layernewiwe, elbowiwe, rotateiwe1, rotateiwe2, layerset, layerfreezeiwe, layernewiwp, pipeiwp, layerset, layerfreezeiwp)
    return one
SedTankLayout1 := stack(Sedtanktankscript, Sedtankslopescript, Sedtankinletchannelscript, Sedtankinletpipescriptlayout1, Sedtankelbowscript, Sedtankmanifoldscript, Sedtanksludgescript, Sedtanklaminascript, Sedtankarrayscript, Sedtankopenchannelscript)
SedTankLayout2 := stack(Sedtanktankscript, Sedtankinletslopescript, Sedtankexitchannelscript, Sedtankinletchannelscript, Sedtankinletpipescript, Sedtankmanifoldscript, Sedtanksludgescript, Sedtanklaminascript, Sedtankarrayscript, Sedtankopenchannelscript, sedechanneltankscript, sedichanneltankscript)
SedTankLayout3 := stack(Sedtanktankscript, Sedtankinletslopescript, Sedtankexitchannelscript, Sedtankinletchannelscript, Sedtankinletpipescript, Sedtankmanifoldscript, Sedtanksludgescript, Sedtanklaminascript, Sedtankarrayscript, Sedtankopenchannelscript, sedechanneltankscript, sedichanneltankscript)
SedTankLayout4 := stack(Sedtanktankscript, Sedtankinletslopescript, Sedtankexitchannelscript, Sedtankinletchannelscript, Sedtankinletpipescript, Sedtankmanifoldscript, Sedtanksludgescript, Sedtanklaminascript, Sedtankarrayscript, Sedtankopenchannelscript, sedechanneltankscript)
SedTank :=
    SedTankLayout1 if sedlayout == 1
    SedTankLayout2 if sedlayout == 2
    SedTankLayout3 if sedlayout == 3
    SedTankLayout4 if sedlayout == 4
# [component: inputs SedTankLayout1]
# [component: inputs SedTankLayout2]
# [component: inputs SedTankLayout3]
# [component: inputs SedTankLayout4]
