# [reference: MasterProgram.xmcd]
sedslopescript(origin, pline1, pline2, pline3, mirror_point, tank_length, slope_width, slope_height, win1, win2) :=
    zoom1 ← zoom_win(win1, win2)
    pline1 ← pline(pline1, pline2, pline3)
    extrude1 ← extrude(origin, tank_length)
    rotate3d1 ← rotate_3d(origin, origin, "x", 90)
    rotate3d2 ← rotate_3d(origin, origin, "z", 270)
    mirror3d1 ← mirror3d(origin, mirror_point)
    unionall ← union_allA
    one ← stack(zoom1, pline1, extrude1, rotate3d1, rotate3d2, mirror3d1, unionall)
    return one
sedslopea(origin, tank_dim, slope_width, slope_height, angle) := sedslopescript([origin[0]; origin[1]; origin[2]], [origin[0]; origin[1]], [origin[0] - slope_width; origin[1]], [origin[0]; origin[1] + slope_height], [origin[0]; origin[1] + slope_width + W_SedDrainCover; origin[2]], tank_dim[0], slope_width, slope_height, [origin[0] - slope_width - zc; origin[1] - zc; origin[2]], [origin[0] + zc; origin[1] + slope_height + zc; origin[2]])
sedslope(origin, tank_dim, angle) := sedslopea(origin, tank_dim, tank_dim[1]/2, tank_dim[1]*tan(angle)/2, angle)
Drawing_sedslope := sedslope([0; 0; 0], [2; 1; 2]*m, 10 deg)
# [component: inputs Drawing_sedslope]
