# [reference: inputs.xmcd]
floctank_sections := 4
maxH := 2
baffle_section_spacing := [0.16; 0.189; 0.277; 0.482]
baffle_thickness := 0.01
freeboard := .1
Baffle :=
    x[0, 0] ← [0; 0]
    y[0, 0] ← [0; maxH - 1.5*baffle_section_spacing[0]]
    k ← 0
    TotalBaffles ← 0
    for i ∈ 0 .. floctank_sections - 1
        numbaffles_section[i] ← ceil(floc_dim[0]/(floctank_sections*baffle_section_spacing[i]))
        for j ∈ 0 .. numbaffles_section[i] - 1
            x[0, k] ← x[0, k - 1] + baffle_section_spacing[i] if k > 0
            x[0, k] ← x[0, 0] otherwise
            y[0, k] ← [1.5*baffle_section_spacing[i]; maxH + freeboard] if mod(k, 2) ≠ 0
            y[0, k] ← [0; maxH - 1.5*baffle_section_spacing[i]] otherwise
            k ← k + 1
        TotalBaffles ← TotalBaffles + numbaffles_section[i]
    i ← i + 1
    return [numbaffles_section; baffle_section_spacing; x; y; TotalBaffles]
return [numbaffles_section; baffle_section_spacing; x; y]
NumofBaffles_Section := Baffle[0]
Baffles_Spacing_Section := Baffle[1]
x_spacing := Baffle[2]
TotalBaffles := Baffle[4]
y_spacing := Baffle[3]
Baffles_Spacing_Section = [0.16; 0.189; 0.277; 0.482]
TotalBaffles = 89
NumofBaffles_Section = [32; 27; 19; 11]
x_spacing = [
    [0; 0], [0.16; 0.16], [0.32; 0.32], [0.48; 0.48], [0.64; 0.64], [0.8; 0.8], [0.96; 0.96], [1.12; 1.12], [1.28; 1.28], [1.44; 1.44]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]
y_spacing = [
    [0; 1.76], [0.24; 2.1], [0; 1.76], [0.24; 2.1], [0; 1.76], [0.24; 2.1], [0; 1.76], [0.24; 2.1], [0; 1.76], [0.24; 2.1]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]
