# [reference: basics - Copy.xmcd]
# platform origin=bottom nw corner
Stock1_script(plat_origin, plat_point, col1_origin, col1_point, col2_origin, col2_point, col3_origin, col3_point, col4_origin, col4_point, barrel1_origin, barrel2_origin, platform_dim, column_dim, R, H_barrel) :=
    box1 ← box(plat_origin, plat_point)
    box2 ← box(col1_origin, col1_point)
    box3 ← box(col2_origin, col2_point)
    box4 ← box(col3_origin, col3_point)
    box5 ← box(col4_origin, col4_point)
    union1 ← union_allA
    cylinder1 ← cylinderC(barrel1_origin, R, H_barrel)
    cylinder2 ← cylinderC(barrel2_origin, R, H_barrel)
    one ← stack(box1, box2, box3, box4, box5, zoomA, union1, cylinder1, cylinder2)
    return ← one
Stock1_scripta(platform_origin, column1_origin, column2_origin, column3_origin, column4_origin, barrel1_origin, barrel2_origin, platform_dim, column_dim, R, H_barrel) := Stock1_script(platform_origin, [
    platform_origin[0] - platform_dim[0];
    platform_origin[1] - platform_dim[1];
    platform_origin[2] + platform_dim[2]
], column1_origin, [
    column1_origin[0] + column_dim[0];
    column1_origin[1] - column_dim[1];
    column1_origin[2] - column_dim[2]
], column2_origin, [
    column2_origin[0] - column_dim[0];
    column2_origin[1] - column_dim[1];
    column2_origin[2] - column_dim[2]
], column3_origin, [
    column3_origin[0] + column_dim[0];
    column3_origin[1] + column_dim[1];
    column3_origin[2] - column_dim[2]
], column4_origin, [
    column4_origin[0] - column_dim[0];
    column4_origin[1] + column_dim[1];
    column4_origin[2] - column_dim[2]
], barrel1_origin, barrel2_origin, platform_dim, column_dim, R, H_barrel)
Stock1(platform_origin, platform_dim, column_dim, disp, R, H_barrel) := Stock1_scripta(platform_origin, [platform_origin[0] - platform_dim[0]; platform_origin[1]; platform_origin[2]], platform_origin, [platform_origin[0] - platform_dim[0]; platform_origin[1] - platform_dim[1]; platform_origin[2]], [platform_origin[0]; platform_origin[1] - platform_dim[1]; platform_origin[2]], [
    platform_origin[0] - ((3*R) + (2*disp));
    platform_origin[1] - (R + disp);
    platform_origin[2] + platform_dim[2]
], [
    platform_origin[0] - (R + disp);
    platform_origin[1] - (R + disp);
    platform_origin[2] + platform_dim[2]
], platform_dim, column_dim, R, H_barrel)
Stock(origin, disp, thick, walkway, column_dim, R, H) := Stock1(origin, [(2*(2*R)) + (3*disp); (2*R) + walkway + disp; thick], column_dim, disp, R, H)
DrawingStock := Stock([0; 0; 0]*m, .1 m, .1 m, 1 ft, [.1; .1; 1]*m, 1.5 ft, 1 m)
# [component: inputs DrawingStock]
