# [reference: basics - Copy.xmcd]
# [reference: pipe - Copy.xmcd]
# [reference: PipeDatabase.xmcd]
Crossscript1(p1, p2, p3, p4, p5, p7, p8, p9, p10, p11, p12, p13, p14, p15, p16, p17, p18, p19, p20, p21, p22, p23, p24, ND, R1, R2, R3, L, H, win1, win2, EN) :=
    viewtop ← viewtop
    zoom_win ← zoom_wina(win1, win2)
    pipe1 ← Pipe(p1, ND, L, EN)
    pipe2 ← Pipe(p2, ND, L/2, EN)
    rotate1 ← rotate_3d(p3, p2, "y", 90)
    union1 ← unionA(p4, p5)
    cylinder1 ← cylinderA(p1, R2, L)
    subtract1 ← subtractA(p4, p3)
    cylinder5 ← cylinderC(p1, R3, -H)
    cylinder6 ← cylinderA(p1, R1, -H)
    subtract3 ← subtractA(p7, p8)
    viewfront ← viewfront
    mirror1 ← mirrorA(p9, p10, p11)
    mirror2 ← mirrorA(p9, p10, p12)
    bigunion1 ← bigunion(p13, p14, p15, p16)
    mirror3 ← mirrorA(p17, p18, p19)
    cylinder7 ← cylinderB(p20, R2, p21)
    subtract4 ← subtractB(p22, p23, p24)
    viewfront2 ← concat("_-view", sp, "o", sp, "f")
    one ← concat(viewtop, zoom_win, pipe1)
    two ← concat(pipe2)
    three ← concat(rotate1)
    four ← concat(union1, cylinder1, zoomA)
    five ← concat(subtract1, cylinder5)
    six ← concat(cylinder6, viewtop, subtract3, viewfront1)
    seven ← concat(mirror1, mirror2, zoomA)
    eight ← concat(bigunion1, zoom, mirror3, viewtop1)
    nine ← concat(cylinder7, subtract4, viewfront1)
    return stack(one, two, three, four, five, six, seven, eight, nine)
# p1 | p2 | p3 | p4 | p5 | p7 | p8 | p9 | p10 | p11 | p12 | p13 | p14 | p15 | p16 | p17 | p18 | p19 | p20 | p21 | p22 | p23 | p24
Cross1(origin, ND, R1, R2, R3, L, H, EN) := Crossscript1([origin[0]; origin[1]; origin[2]], [origin[0]; origin[1]; origin[2] + L/2], [origin[0] + innerD(ND, EN)/2; origin[1]; origin[2] + L/2], [origin[0] - R1; origin[1]; origin[2]], [origin[0] + L/2; origin[1] + R1; origin[2] + L/2], [origin[0] - R3; origin[1]; origin[2]], [origin[0] - R1; origin[1]; origin[2]], [origin[0]; origin[2] - H; -origin[1] - R3], [origin[0]; origin[2] + L/2], [origin[0] + zc; origin[2] + L/2 - zc], [origin[0] + zc; origin[2] + L/2], [origin[0]; origin[2] + L + H; -origin[1]], [origin[0] + L/2 + H; origin[2] + L/2; -origin[1]], [origin[0]; origin[2] - H; -origin[1]], [origin[0]; origin[2] + R2; -origin[1]], [origin[0]; origin[2] + R2; origin[1]], [origin[0]; origin[2]], [origin[0]; origin[2] + zc], [origin[0] - L/2; origin[1]; origin[2] + L/2], [origin[0] + L/2; origin[1]; origin[2] + L/2], [origin[0] - L/4; origin[1] - R1; origin[2]], [origin[0] + L/4; origin[1] - R1; origin[2]], [origin[0]; origin[1]; origin[2] + L/2 - R3], ND, R1, R2, R3, L, H, [origin[0] - (L/2 + H); origin[1] - R3; origin[2]], [origin[0] + (L/2 + H); origin[1] + R3; origin[2]], EN)
Cross(origin, ND, EN) := Cross1(origin, ND, outerradius(ND), innerD(ND, EN)/2, ConRadius(ND), ShortTeeLength(ND)*2, SocketDepth(ND), EN)
Drawing_Cross := Cross([50; -57; 3]*m, 2 in, 4)
# [component: inputs Drawing_Cross]
