# [reference: basics.xmcd]
# [reference: tank.xmcd]
# [reference: lamina - Copy.xmcd]
tank_origin := [0; 0; 0]
T_PlantWall := .15 m
L_Sed := 3.021 m
X_FlocBaffles := [
    0.229, 2.741;
    0.338, 2.595;
    0.448, 2.448;
    0.557, 2.301;
    0.667, 2.016;
    0.777, 1.731;
    0.886, 1.447;
    0.996, 1.162;
    1.106, 0.877;
    1.215, 0.592;
    1.325, 0.307;
    1.434, 0;
    1.581, 0;
    1.728, 0;
    1.875, 0;
    2.021, 0;
    2.168, 0;
    2.315, 0;
    2.462, 0;
    2.608, 0
]*m
Z_FlocBaffles := [
    0, 0;
    0.134, 0.19;
    0, 0;
    0.134, 0.19;
    0, 0;
    0.134, 0.397;
    0, 0;
    0.134, 0.397;
    0, 0;
    0.134, 0.397;
    0, 0;
    0.134, 0;
    0, 0;
    0.19, 0;
    0, 0;
    0.19, 0;
    0, 0;
    0.19, 0;
    0, 0;
    0.19, 0
]*m
L_FlocBaffles := [
    0.866, 0.81;
    1.0, 0.9;
    0.866, 0.81;
    1.0, 0.9;
    0.866, 0.603;
    1.0, 0.7;
    0.866, 0.603;
    1.0, 0.7;
    0.866, 0.603;
    1.0, 0.7;
    0.866, 0.603;
    1.0, 0;
    0.81, 0;
    0.9, 0;
    0.81, 0;
    0.9, 0;
    0.81, 0;
    0.9, 0;
    0.81, 0;
    0.9, 0
]*m
ND_SedPipeEntrance := 6 in
W_Sed := 1 m
EN_PipeSpec := 4
T_Mp := .3 m
H_Sed := 1.1 m
ND_SedSludge := 3 in
HW_Sed := 1 m
AN_SedBottom := 45 deg
H_SedAbove := .12 m
ND_SedLaunder := 6 in
W_Channel := .245 m
W_EChannel := .245 m
H_Channel := .3 m
H_EChannel := .3 m
T_EChannelWall := .15 m
T_ChannelWall := .15 m
N_SedTanks := 3
H_SedBelow := .5 m
D_SedSludgeOrifice := 5 mm
D_SedLaunderOrifice := 9 mm
N_SedSludgeOrifices := 45
N_SedLaunderOrifices := 70
B_SedSludgeOrifices := .1 m
B_SedLaunderOrifices := .1 m
L_SedPlate := .329 m
AN_SedPlate := 60 deg
N_SedPlates := 75
Amp_SedPlate := .5 in
B_SedPlate := .05 m
T_SedPlate := 3 mm
Per_SedPlate := 8.5
N_FlocChannels := 2
N_SedPlateCol := 1
lamina_y := 7 cm
W_FlocChannel := W_Sed/N_FlocChannels
L_Floc := L_Sed*N_FlocChannels
H_Floc := H_Sed
W_FlocPort := .379 m
H_FlocPort := .75 m
baffle_amp := .5 in
baffle_thick := 4 mm
baffle_slope := 90 deg
baffle_width := W_FlocChannel
baffle_col := 1  # this is a constant!
baffle_periods := 8.5
baffle_y := 7 cm
baffle_num := 1
baffle_x := 4 in
# Automated Design: AutoCAD: Flocculation Tank
# Dimensions
totalfloc_dim := [L_Floc/N_FlocChannels; (N_FlocChannels*W_FlocChannel) + ((N_FlocChannels - 1)*T_PlantWall); H_Floc]
wall_dim := [totalfloc_dim[0] + (2*T_PlantWall); T_PlantWall; totalfloc_dim[2]]
# Origin Points
floc_origin := [tank_origin[0]; tank_origin[1] + N_SedTanks*(W_Sed + T_PlantWall); tank_origin[2]]
wall_origin := [
    tank_origin[0] - totalfloc_dim[0] - T_PlantWall;
    tank_origin[1] + N_SedTanks*(W_Sed + T_PlantWall) + W_FlocChannel;
    tank_origin[2]
]
flochole_origin := [
    tank_origin[0] - W_FlocPort;
    tank_origin[1] + N_SedTanks*(W_Sed + T_PlantWall) + W_FlocChannel;
    tank_origin[2]
]
Y_FlocBaffles :=
    for j ∈ 0 .. (N_FlocChannels - 1)
        Y_FlocBaffles[0, j] ← tank_origin[1] + (N_SedTanks*(W_Sed + T_PlantWall)) + ((N_FlocChannels - j - 1)*(W_FlocChannel + T_PlantWall))
    return Y_FlocBaffles
# Flocculation Tank Script
Floctanktankscript :=
    layer1 ← layer_new("floctank", dkgrey)
    tank1 ← Tank(floc_origin, totalfloc_dim, T_PlantWall)
    layerset1 ← layer_set("0")
    layerfreeze1 ← layer_freeze("floctank")
    one ← stack(layer1, tank1, layerset1, layerfreeze1)
    return one
Floctankwallscript :=
    layer2 ← layer_new("floctankwall", dkgrey)
    box1 ← box(wall_origin, [wall_origin[0] + wall_dim[0]; wall_origin[1] + wall_dim[1]; wall_origin[2] + wall_dim[2]])
    box2 ← box(flochole_origin, [flochole_origin[0] + W_FlocPort; flochole_origin[1] + T_PlantWall; flochole_origin[2] + H_FlocPort])
    subtract0 ← subtractD([flochole_origin[0] + W_FlocPort + T_PlantWall; flochole_origin[1]; flochole_origin[2]], flochole_origin)
    layerset2 ← layer_set("0")
    layerthaw2 ← layer_thaw("floctank")
    bigunion1 ← union_allA
    layerfreeze2 ← layer_freeze("floctankwall")
    one ← stack(layer2, box1, box2, subtract0, layerset2, layerthaw2, bigunion1, layerset2, layerfreeze2)
    return one
Floctankchannelopeningscript :=
    layer3 ← layer_new("flocchannelhole", dkgrey)
    box3 ← box([
        floc_origin[0] - totalfloc_dim[0];
        floc_origin[1] - T_PlantWall;
        floc_origin[2] + totalfloc_dim[2] - H_Channel
    ], [floc_origin[0] - totalfloc_dim[0] + W_Channel; floc_origin[1]; (floc_origin[2] + totalfloc_dim[2])])
    layerset3 ← layer_set("0")
    layerthaw3 ← layer_thaw("floctankwall")
    viewtop ← viewtop1
    subtract3 ← subtractD(floc_origin, [
        floc_origin[0] - totalfloc_dim[0];
        floc_origin[1] - T_PlantWall;
        floc_origin[2] + totalfloc_dim[2] - H_Channel
    ])
    bigunion ← union_allA
    layerfreeze3 ← layer_freeze("floctankwall")
    one ← stack(layer3, box3, layerset3, layerthaw3, viewtop, subtract3, bigunion, layerfreeze3)
    return ← one
Floctankbafflescript :=
    local ← layer_new("baffle", ltpurple)
    x(j) ←
        a ← 0
        for t ∈ 0 .. (rows(X_FlocBaffles) - 1)
            a ← a + 1 if X_FlocBaffles[t, j] ≠ 0
        return a
    for j ∈ 0 .. (N_FlocChannels - 1)
        for i ∈ 0 .. (x(j) - 1)
            baffle_origin[i] ← [tank_origin[0] - L_Sed; 0; tank_origin[2]] + [X_FlocBaffles[i, j]; Y_FlocBaffles[0, j]; Z_FlocBaffles[i, j]]
            baffle_length[i] ← L_FlocBaffles[i, j]
            local ← stack(local, lamina(baffle_origin[i], baffle_amp, baffle_width, baffle_length[i], baffle_thick, baffle_periods, baffle_slope, baffle_num, baffle_col, baffle_x, baffle_y))
            local
        local
    return local
Floctankendscript :=
    layerset ← layer_set("0")
    layerfreeze1 ← layer_freeze("baffle")
    one ← stack(layerset, layerfreeze1)
    return one
FlocTank := stack(Floctanktankscript, Floctankwallscript, Floctankchannelopeningscript, Floctankbafflescript, Floctankendscript)
# [component: inputs FlocTank]
