tank_origin := [0; 0; 0]
T_PlantWall := .15 m
L_Sed := 4.529 m
ND_SedPipeEntrance := 6 in
T_ChannelWall := .15 m
W_Sed := 1 m
EN_PipeSpec := 4
T_Mp := .3 m
H_Sed := 2.129 m
ND_SedSludge := 3 in
W_Channel := .245 m
HW_Sed := 2.029 m
AN_SedBottom := 45 deg
H_SedAbove := .25 m
H_Channel := .3 m
ND_SedLaunder := 6 in
N_SedTanks := 3
H_SedBelow := 1 m
D_SedSludgeOrifice := 5 mm
D_SedLaunderOrifice := 9 mm
N_SedSludgeOrifices := 45
N_SedLaunderOrifices := 70
B_SedSludgeOrifices := .1 m
B_SedLaunderOrifices := .1 m
L_SedPlate := .9 m
AN_SedPlate := 60 deg
N_SedPlates := 63
Amp_SedPlate := .5 in
B_SedPlate := .05 m
T_SedPlate := 3 mm
Per_SedPlate := 8.5
N_SedPlateCol := 1
lamina_y := 7 cm
L_Floc := 9.059 m
N_FlocChannels := 2
W_FlocChannel := .5 m
H_Floc := H_Sed
# Automated Design: AutoCAD: Flocculation Tank
# Dimensions
totalfloc_dim := [L_Floc/N_FlocChannels; (N_FlocChannels*W_FlocChannel) + ((N_FlocChannels - 1)*T_PlantWall); H_Floc]
wall_dim := [totalfloc_dim[0] + (2*T_PlantWall); T_PlantWall; totalfloc_dim[2]]
# Origin Points
floc_origin := [tank_origin[0]; tank_origin[1] + num_tanks*(tank_dim[1] + T_PlantWall); tank_origin[2]]
wall_origin := [
    tank_origin[0] - floc_dim[0] - T_PlantWall;
    tank_origin[1] + num_tanks*(tank_dim[1] + T_PlantWall) + floc_dim[1];
    tank_origin[2]
]
hole_origin := [
    tank_origin[0] - flochole_dim[0];
    tank_origin[1] + num_tanks*(tank_dim[1] + T_PlantWall) + floc_dim[1];
    tank_origin[2]
]
baffletank1_origin := [
    tank_origin[0] - tank_dim[0];
    tank_origin[1] + num_tanks*(tank_dim[1] + T_PlantWall) + floc_dim[1] + wall_dim[1];
    tank_origin[2]
]
baffletank2_origin := [
    tank_origin[0] - tank_dim[0];
    tank_origin[1] + num_tanks*(tank_dim[1] + T_PlantWall);
    tank_origin[2]
]
# Flocculation Tank Script
Floctankscript1 :=
    layer1 ← layer_new("floctank", dkgrey)
    tank1 ← Tank(floc_origin, totalfloc_dim, T_PlantWall)
    box1 ← box(wall_origin, [wall_origin[0] + wall_dim[0]; wall_origin[1] + wall_dim[1]; wall_origin[2] + wall_dim[2]])
    box2 ← box(hole_origin, [
        hole_origin[0] + flochole_dim[0];
        hole_origin[1] + flochole_dim[1];
        hole_origin[2] + flochole_dim[2]
    ])
    subtract0 ← subtractD([hole_origin[0] + flochole_dim[0] + T_PlantWall; hole_origin[1]; hole_origin[2]], hole_origin)
    union1 ← unionC([
        floc_origin[0] - totalfloc_dim[0] - T_PlantWall - zc;
        floc_origin[1] - T_PlantWall - zc;
        floc_origin[2]
    ], [
        floc_origin[0] + T_PlantWall + zc;
        floc_origin[1] + totalfloc_dim[1] + T_PlantWall + zc;
        floc_origin[2]
    ])
    box3 ← box([
        floc_origin[0] - totalfloc_dim[0];
        floc_origin[1] - T_PlantWall;
        floc_origin[2] + totalfloc_dim[2] - channel_dim[2]
    ], [
        floc_origin[0] - totalfloc_dim[0] + channel_dim[1];
        floc_origin[1];
        (floc_origin[2] + totalfloc_dim[2])
    ])
    subtract1 ← subtractD(floc_origin, [
        floc_origin[0] - floc_dim[0];
        floc_origin[1] - T_PlantWall;
        floc_origin[2] + floc_dim[2] - channel_dim[2]
    ])
    layerset ← layer_set("0")
    layerfreeze1 ← layer_freeze("floctank ")
    one ← stack(layer1, tank1, box1, box2, subtract0, union1, box3, subtract1, layerset, layerfreeze1)
    return one
Floctankscript2 :=
    local ← layer_new("baffle", ltpurple)
    for i ∈ 1 .. baffletank1_num
        baffle1_origin[i] ← baffletank1_origin + [baffletank1_location[i - 1, 0]; 0; baffletank1_location[i - 1, 1]]
        baffletank1_length[i] ← baffletank1_location[i - 1, 2]
        local ← stack(local, lamina(baffle1_origin[i], baffle_amp, baffle_width, baffletank1_length[i], baffle_thick, baffle_periods, baffle_slope, baffle_num, baffle_col, baffle_x, baffle_y))
    local
Floctankscript3 :=
    local ← lamina(baffletank2_origin + [baffletank2_location[0, 0]; 0; baffletank2_location[0, 1]], baffle_amp, baffle_width, baffletank2_location[0, 2], baffle_thick, baffle_periods, baffle_slope, baffle_num, baffle_col, baffle_x, baffle_y)
    for i ∈ 1 .. baffletank2_num - 1
        baffle2_origin[i] ← baffletank2_origin + [baffletank2_location[i, 0]; 0; baffletank2_location[i, 1]]
        baffletank2_length[i] ← baffletank2_location[i, 2]
        local ← stack(local, lamina(baffle2_origin[i], baffle_amp, baffle_width, baffletank2_length[i], baffle_thick, baffle_periods, baffle_slope, baffle_num, baffle_col, baffle_x, baffle_y))
    layerset ← layer_set("0")
    layerfreeze2 ← layer_freeze("baffle")
    one ← stack(local, layerset, layerfreeze2)
    one
FlocTank := stack(Floctankscript1, Floctankscript2, Floctankscript3)
