acad_version := 2007
# [reference: basics.xmcd]
# [reference: tank.xmcd]
# [reference: lamina - Copy.xmcd]
# [reference: laminaplain1 - Copy.xmcd]
Plant_Origin := [0; 0; 0]*m
L_Sed := 3.021 m
T_PlantWall := .15 m
W_Sed := 1 m
T_Mp := .3 m
H_Sed := 1.1 m
EN_PipeSpec := 4
N_FlocChannels := 2
N_SedTanks := 3
W_InletChannel := .245 m
H_InletChannel := .3 m
W_FlocChannel := W_Sed/2
X_FlocBaffles := [
    0.229, 2.741;
    0.338, 2.595;
    0.448, 2.448;
    0.557, 2.301;
    0.667, 2.016;
    0.777, 1.731;
    0.886, 1.447;
    0.996, 1.162;
    1.106, 0.877;
    1.215, 0.592;
    1.325, 0.307;
    1.434, 0;
    1.581, 0;
    1.728, 0;
    1.875, 0;
    2.021, 0;
    2.168, 0;
    2.315, 0;
    2.462, 0;
    2.608, 0
]*m
Z_FlocBaffles := [
    0, 0;
    0.134, 0.19;
    0, 0;
    0.134, 0.19;
    0, 0;
    0.134, 0.397;
    0, 0;
    0.134, 0.397;
    0, 0;
    0.134, 0.397;
    0, 0;
    0.134, 0;
    0, 0;
    0.19, 0;
    0, 0;
    0.19, 0;
    0, 0;
    0.19, 0;
    0, 0;
    0.19, 0
]*m
L_FlocBaffles := [
    0.866, 0.81;
    1.0, 0.9;
    0.866, 0.81;
    1.0, 0.9;
    0.866, 0.603;
    1.0, 0.7;
    0.866, 0.603;
    1.0, 0.7;
    0.866, 0.603;
    1.0, 0.7;
    0.866, 0.603;
    1.0, 0;
    0.81, 0;
    0.9, 0;
    0.81, 0;
    0.9, 0;
    0.81, 0;
    0.9, 0;
    0.81, 0;
    0.9, 0
]*m
Baffle_complex := 0  # 0 if rectangular, 1 if baffle is corrugated
Amp_FlocBaffle := .5 in
T_FlocBaffle := 4 mm
Per_FlocBaffle := 8.5
AN_FlocBaffle := 90 deg  # this is a constant!
N_Baffle := 1
N_FlocBaffleCol := 1
X_FlocBaffle := 4 in
Y_FlocBaffle := 7 cm
W_FlocPort := .379 m
H_FlocPort := .75 m
# Automated Design: AutoCAD: Flocculation Tank
L_Floc := L_Sed*N_FlocChannels
H_Floc := H_Sed
# Dimensions
totalfloc_dim := [L_Floc/N_FlocChannels; (N_FlocChannels*W_FlocChannel) + ((N_FlocChannels - 1)*T_PlantWall); H_Floc]
wall_dim := [totalfloc_dim[0] + (2*T_PlantWall); T_PlantWall; totalfloc_dim[2]]
flocport_dim :=
    for i ∈ 0 .. (N_FlocChannels - 2)
        flocport_dim[0, i] ← [W_FlocPort; T_PlantWall; H_FlocPort]
    return flocport_dim
channelopening_dim := [W_InletChannel; T_PlantWall; H_InletChannel]
# Origin Points
floc_origin := [Plant_Origin[0]; Plant_Origin[1] + N_SedTanks*(W_Sed + T_PlantWall); Plant_Origin[2]]
wall_origin :=
    for i ∈ 0 .. (N_FlocChannels - 2)
        wall_origin[0, i] ← [
            Plant_Origin[0] - totalfloc_dim[0] - T_PlantWall;
            Plant_Origin[1] + N_SedTanks*(W_Sed + T_PlantWall) + (W_FlocChannel*(1 + i)) + (T_PlantWall*i);
            Plant_Origin[2]
        ]
    return wall_origin
flocport_origin :=
    for i ∈ 0 .. (N_FlocChannels - 2)
        if round(round(i/2) - (i/2)) == 0
            flocport_origin[0, i] ← [
                Plant_Origin[0] - W_FlocPort;
                Plant_Origin[1] + N_SedTanks*(W_Sed + T_PlantWall) + (W_FlocChannel*(1 + i));
                Plant_Origin[2]
            ]
        if round(round(i/2) - (i/2)) == 1
            flocport_origin[0, i] ← [
                Plant_Origin[0] - totalfloc_dim[0];
                Plant_Origin[1] + N_SedTanks*(W_Sed + T_PlantWall) + (W_FlocChannel*(1 + i));
                Plant_Origin[2]
            ]
    return flocport_origin
channelopening_origin := [
    floc_origin[0] - totalfloc_dim[0];
    floc_origin[1] - T_PlantWall;
    floc_origin[2] + totalfloc_dim[2] - H_InletChannel
]
Y_FlocBaffles :=
    for j ∈ 0 .. (N_FlocChannels - 1)
        Y_FlocBaffles[0, j] ← Plant_Origin[1] + (N_SedTanks*(W_Sed + T_PlantWall)) + ((N_FlocChannels - j - 1)*(W_FlocChannel + T_PlantWall))
    return Y_FlocBaffles
# Flocculation Tank Script
Floctanktankscript :=
    layer1 ← layer_new("floctank", dkgrey)
    tank1 ← Tank(floc_origin, totalfloc_dim, T_PlantWall)
    layerset1 ← layer_set("0")
    layerfreeze1 ← layer_freeze("floctank")
    one ← stack(layer1, tank1, layerset1, layerfreeze1)
    return one
Floctankwallscript :=
    local ← layer_new("floctankwall", dkgrey)
    for i ∈ 0 .. (N_FlocChannels - 2)
        local ← stack(local, box(wall_origin[0, i], wall_origin[0, i] + wall_dim), box(flocport_origin[0, i], flocport_origin[0, i] + flocport_dim[0, i]), subtractD(wall_origin[0, i], flocport_origin[0, i]))
        local
    layerset2 ← layer_set("0")
    layerthaw2 ← layer_thaw("floctank")
    bigunion1 ← union_allA
    layerfreeze2 ← layer_freeze("floctankwall")
    local ← stack(local, layerset2, layerthaw2, bigunion1, layerset2, layerfreeze2)
    return local
Floctankchannelopeningscript :=
    layer3 ← layer_new("flocchannelhole", dkgrey)
    box3 ← box(channelopening_origin, channelopening_origin + channelopening_dim)
    layerset3 ← layer_set("0")
    layerthaw3 ← layer_thaw("floctankwall")
    viewtop ← viewtop1
    subtract3 ← subtractD(floc_origin, [
        floc_origin[0] - totalfloc_dim[0];
        floc_origin[1] - T_PlantWall;
        floc_origin[2] + totalfloc_dim[2] - H_InletChannel
    ])
    bigunion ← union_allA
    layerfreeze3 ← layer_freeze("floctankwall")
    one ← stack(layer3, box3, layerset3, layerthaw3, viewtop, subtract3, bigunion, layerfreeze3)
    return ← one
Floctankbafflescript :=
    local ← layer_new("baffle", ltpurple)
    x(j) ←
        a ← 0
        for t ∈ 0 .. (rows(X_FlocBaffles) - 1)
            a ← a + 1 if X_FlocBaffles[t, j] ≠ 0
        return a
    for j ∈ 0 .. (N_FlocChannels - 1)
        for i ∈ 0 .. (x(j) - 1)
            baffle_origin[i] ← [Plant_Origin[0] - L_Sed; 0; Plant_Origin[2]] + [X_FlocBaffles[i, j]; Y_FlocBaffles[0, j]; Z_FlocBaffles[i, j]]
            baffle_length[i] ← L_FlocBaffles[i, j]
            local ← stack(local, lamina(baffle_origin[i], Amp_FlocBaffle, W_FlocChannel, baffle_length[i], T_FlocBaffle, Per_FlocBaffle, AN_FlocBaffle, N_Baffle, N_FlocBaffleCol, X_FlocBaffle, Y_FlocBaffle)) if Baffle_complex == 1
            local ← stack(local, laminaplain1(baffle_origin[i], W_FlocChannel, baffle_length[i], T_FlocBaffle, AN_FlocBaffle, N_Baffle, N_FlocBaffleCol, X_FlocBaffle)) otherwise
            local
        local
    return local
Floctankendscript :=
    layerset ← layer_set("0")
    layerfreeze1 ← layer_freeze("baffle")
    one ← stack(layerset, layerfreeze1)
    return one
FlocTank := stack(Floctanktankscript, Floctankwallscript, Floctankchannelopeningscript, Floctankbafflescript, Floctankendscript)
# [component: inputs FlocTank]
