# [reference: basics - Copy.xmcd]
Inletslopescript(origin, box_dim, orifice_origin, orifice_dim, mirror_point1, mirror_point2, nrow, ncol, dist, bigslope, s2point1, s2point2, win1, win2) :=
    viewtop ← viewtop1
    zoomwin ← zoom_win(win1, win2)
    box1 ← box(origin, box_dim)
    box2 ← box(orifice_origin, orifice_dim)
    subtract1 ← subtractD(origin, orifice_origin)
    viewside ← viewrightside1
    subtract2 ← subtractD(s2point1, s2point2)
    array ← arrayB(origin, nrow, ncol, dist)
    union ← union_allA
    rotate ← rotate_3d(origin, origin, "x", 90 - (bigslope*(180/π)))
    mirror ← mirror_all(mirror_point1, mirror_point2)
    bigunion ← union_allA
    one ← stack(viewtop, zoomwin, box1, box2, subtract1, array, union, rotate, mirror, bigunion) if ncol ≠ 1
    one ← stack(viewtop, zoomwin, box1, box2, viewside, subtract2, viewtop, rotate, mirror, bigunion) if ncol == 1
    return one
Inletslopescripta(origin, dim, Length, l_orifice, h_orifice, n, bigslope, thick) := Inletslopescript(origin, origin + dim, [origin[0] + dim[0]/2 - l_orifice/2; origin[1]; origin[2]], [origin[0] + dim[0]/2 + l_orifice/2; origin[1] + dim[1]; origin[2] + h_orifice], [origin[0]; origin[1]], [origin[0] + zc; origin[1]], 1, n, Length/n, bigslope, [origin[1]; origin[2] + dim[2]], [origin[1]; origin[2]], [origin[0] - zc; origin[1] - zc; origin[2] - zc], [origin[0] + dim[0] + zc; origin[1] + dim[1] + zc; origin[2] + dim[2] + zc])
Inletslope(origin, Length, L_slope, l_orifice, h_orifice, thick, n, bigslope) := Inletslopescripta(origin, [Length/n; thick; L_slope], Length, l_orifice, h_orifice, n, bigslope, thick)
origin := [0; 0; 0]*m
L_SedInletOrifice := 2 m
H_SedInletOrifice := 6 in
L_Sed := 2 m
T_SedInletSlope := 2 in
N_SedInletSlope := 1
L_slope := .6 m
bigslope := 45 deg
Drawing_Inletslope := Inletslope(origin, L_Sed, W_Sed, L_SedInletOrifice, H_SedInletOrifice, T_SedInletSlope, N_SedInletSlope, bigslope)  # error: This variable is undefined.
# [component: inputs Drawing_Inletslope]
