# [reference: basics - Copy.xmcd]
laminaplainscript(origin, dim, angle, num_baffles, num_bafflecols, xspace, yspace, win1, win2) :=
    viewtoplam ← viewtop
    zoom ← zoom_wina(win1, win2)
    box ← boxA(origin, origin + dim)
    rotate ← rotate_3d1(origin, origin, "y", angle)
    array ← array(origin, num_bafflecols, num_baffles)
    concat ← (viewtoplam, zoom, box, rotate)
laminaplain(origin, amp, w, l, t, periods, angle, num_baffles, num_bafflecols, xspace, yspace) := laminaplainscript(origin, [t; w; l], 90 - 60/deg, num_baffles, num_bafflecols, xspace, yspace, [origin[0] - zc; origin[1] - zc; origin[2] - zc], [origin[0] + t + zc; origin[1] + w + zc; origin[2] + l + zc])
xspace := 1 ft
width := 1 m
periods := 2
origin := [0; 0; 0]*m
anglel := 60 deg
yspace := 3 ft
lengthl := 2 m
thick := 1 cm
num_baffles := 6
amplitude := 5 cm
num_bafflecols := 1
laminaplain(origin, amplitude, width, lengthl, thick, periods, anglel, num_baffles, num_bafflecols, xspace, yspace) =  # error: Specified cast is not valid.
