# [reference: basics - Copy.xmcd]
laminaplainscript(origin, dim, angle, win1, win2) :=
    viewtoplam ← viewtop
    zoom ← zoom_wina(win1, win2)
    box ← boxA(origin, origin + dim)
    rotate ← rotate_3d1(origin, origin, "y", angle)
    sum ← concat(viewtoplam, zoom, box, rotate)
laminaplain(origin, w, l, t, angle) := laminaplainscript(origin, [t; w; l], 90 - angle/deg, [origin[0] - zc; origin[1] - zc; origin[2] - zc], [origin[0] + t + zc; origin[1] + w + zc; origin[2] + l + zc])
xspace := 1 ft
width := 1 m
periods := 2
origin := [0; 0; 0]*m
anglel := 60 deg
yspace := 3 ft
lengthl := 2 m
thick := 1 cm
num_baffles := 6
amplitude := 5 cm
num_bafflecols := 1
laminaplain(origin, width, lengthl, thick, anglel) = "_-view o t _zoom w -0.01,-0.01,-0.01 0.02,1.01,2.01 _box 0,0,0 0.01,1,2 _rotate3d 0,0,0  y 0,0,0 30 "
# [component: inputs lamina([0; 0; 0], 5 in, 1 m, 1 m, 4 mm, 8.5, 60, 6, 1, .05 m, 7 cm)]
