# [reference: basics - Copy.xmcd]
# [reference: PipeDatabase.xmcd]
Pipescript(origin, p2, p3, win1, win2, pipe_outr, pipe_inr, pipe_length) :=
    zoom_win ← zoom_wina(win1, win2)
    cylinder1 ← cylinderA(origin, pipe_outr, pipe_length)
    cylinder2 ← cylinderA(origin, pipe_inr, pipe_length)
    subtract1 ← subtractD(p2, p3)
    return concat(viewtop, zoom_win, cylinder1, cylinder2, subtract1)
Pipe(origin, ND_pipe, pipe_length, EN_PipeSpec) := Pipescript([origin[0]; origin[1]; origin[2]], [origin[0] + outerradius(ND_pipe); origin[1]; origin[2]], [origin[0] + innerD(ND_pipe, EN_PipeSpec)/2; origin[1]; origin[2]], [origin[0] - outerradius(ND_pipe) - zc; origin[1] - outerradius(ND_pipe) - zc; origin[2]], [origin[0] + outerradius(ND_pipe) + zc; origin[1] + outerradius(ND_pipe) + zc; origin[2]], outerradius(ND_pipe), innerD(ND_pipe, EN_PipeSpec)/2, pipe_length)
# p2 | p3
Drawing_Pipe := Pipe([1; 2; 3]*m, 6 in, 1.5 ft, 4)
# [component: inputs Drawing_Pipe]
