# [reference: basics - Copy.xmcd]
# [reference: chemicalstock - Copy.xmcd]
# [reference: MasterProgram.xmcd]
L_SedInletOrifice := 4 in
H_SedInletOrifice := 6 in
T_SedInletSlope := 2 in
N_SedInletSlope := 10
H_SedAbove = 0.12 m
AN_SedSludgeBottom := 20 deg
W_EChannel := .245 m
H_EChannel := .3 m
T_EChannelWall := .15 m
lamina_y := 7 cm
L_Plt := .5 m
L_ChannelInlet := .5*W_Sed
W_ChannelInlet := .65*W_Channel
# Automated Design: AutoCAD: Platform
# Platform Inputs
tank_origin := [0; 0; 0]*m
platformlayout :=
    layout ← 1
    layout ← 2 if |L_Et| > |L_Plt|
    return layout
column_dim := [W_MpColumn; L_MpColumn; H_Sed + T_PlantWall - H_Channel - T_ChannelWall]
# Origins Points
platform1_origin := [
    tank_origin[0] + T_PlantWall;
    tank_origin[1] + (N_SedTanks*W_Sed) + ((N_SedTanks + 2)*T_PlantWall) + 2*W_FlocChannel;
    tank_origin[2] + H_Sed - H_Channel - T_Mp
]
platform2_origin := [
    tank_origin[0] - L_Sed - T_PlantWall;
    tank_origin[1] - T_PlantWall;
    tank_origin[2] + H_Sed - H_Channel - T_Mp
]
column1_origin := [
    tank_origin[0] + T_PlantWall;
    tank_origin[1] + (N_SedTanks*W_Sed) + ((N_SedTanks + 2)*T_PlantWall) + 2*W_FlocChannel + W_MpWalkway;
    tank_origin[2] + H_Sed - H_Channel - T_ChannelWall
]
column2_origin :=
    if platformlayout == 1
        origin ← [
            tank_origin[0] - L_Sed - T_PlantWall - W_MpWalkway - L_Et - 2*T_EtWall - ShortTeeLength(ND_Lfom) - walk_space - 2*D_Drum - 3*S_Drum + column_dim[0];
            tank_origin[1] + (N_SedTanks*W_Sed) + ((N_SedTanks + 2)*T_PlantWall) + 2*W_FlocChannel + W_MpWalkway;
            tank_origin[2] + H_Sed - H_Channel - T_ChannelWall
        ]
    if platformlayout == 2
        origin ← [
            tank_origin[0] - L_Sed - T_PlantWall - W_MpWalkway - L_Plt - 2*T_PltWall - 2*D_Drum - 3*S_Drum + column_dim[0];
            tank_origin[1] + (N_SedTanks*W_Sed) + ((N_SedTanks + 2)*T_PlantWall) + 2*W_FlocChannel + W_MpWalkway;
            tank_origin[2] + H_Sed - H_Channel - T_ChannelWall
        ]
    return origin
column3_origin :=
    if platformlayout == 1
        origin ← [
            tank_origin[0] - L_Sed - T_PlantWall - W_MpWalkway - L_Et - 2*T_EtWall - ShortTeeLength(gritpipe_inr) - walk_space - 2*D_Drum - 3*S_Drum + column_dim[0];
            tank_origin[1] - T_PlantWall + column_dim[1];
            tank_origin[2] + H_Sed - H_Channel - T_ChannelWall
        ]
    if platformlayout == 2
        origin ← [
            tank_origin[0] - L_Sed - T_PlantWall - W_MpWalkway - L_Plt - 2*T_PltWall - 2*D_Drum - 3*S_Drum + column_dim[0];
            tank_origin[1] - T_PlantWall + column_dim[1];
            tank_origin[2] + H_Sed - H_Channel - T_ChannelWall
        ]
    return origin
platform1_dim := [-(L_Sed + 2*T_PlantWall); W_MpWalkway; T_Mp]
platform2_dim :=
    if platformlayout == 1
        origin ← [
            -(W_MpWalkway + L_Et + 2*T_EtWall + 2*D_Drum + 3*S_Drum + ShortTeeLength(ND_Lfom) + walk_space);
            (N_SedTanks*W_Sed) + ((N_SedTanks + 2)*T_PlantWall) + 2*W_FlocChannel + W_MpWalkway + T_PlantWall;
            T_Mp
        ]
    if platformlayout == 2
        origin ← [
            -(W_MpWalkway + L_Plt + 2*T_PltWall + 2.*D_Drum + 3*S_Drum);
            (N_SedTanks*W_Sed) + ((N_SedTanks + 2)*T_PlantWall) + 2*W_FlocChannel + W_MpWalkway + T_PlantWall;
            T_Mp
        ]
    return origin
# Platform Scripts
MainPlatformscript :=
    layer1 ← layer_new("platform", grey)
    if |platform2grit_dim[0]| > |platform2lvl_dim[0]|
        box1 ← box(platform1_origin, [
            platform1_origin[0] + platform1_dim[0];
            platform1_origin[1] + platform1_dim[1];
            platform1_origin[2] + platform1_dim[2]
        ])
        box2 ← box(platform2_origin, [
            platform2_origin[0] + platform2grit_dim[0];
            platform2_origin[1] + platform2grit_dim[1];
            platform2_origin[2] + platform2grit_dim[2]
        ])
        box3 ← box(column1_origin, [
            column1_origin[0] - column_dim[0];
            column1_origin[1] - column_dim[1];
            column1_origin[2] - column_dim[2]
        ])
        box4 ← box(column2grit_origin, [
            column2grit_origin[0] - column_dim[0];
            column2grit_origin[1] - column_dim[1];
            column2grit_origin[2] - column_dim[2]
        ])
        box5 ← box(column3grit_origin, [
            column3grit_origin[0] - column_dim[0];
            column3grit_origin[1] - column_dim[1];
            column3grit_origin[2] - column_dim[2]
        ])
    union1 ← union_allA
    layerset ← layer_set("0")
    layerfreeze1 ← layer_freeze("platform")
    one ← stack(layer1, box1, box2, box3, box4, box5, union1, layerset, layerfreeze1)
    return ← one
AlumStock :=
    layernewap ← layer_new("alumplatform")
    alumplatform ← StockPlatform(alumplat_origin, alumplat_dim, alumplatcol_dim)
    layerseta ← layer_set("0")
    layerfreezeap ← layer_freeze("alumplatform")
    layernewab ← layer_new("alumbarrels")
    alumbarrels ← StockBarrels(alumplat_origin, S_Drum, T_Ap, W_ApWalkway, D_Drum/2, H_Drum)
    layerfreezeab ← layer_freeze("alumbarrels")
    one ← stack(layernewap, alumplatform, layerseta, layerfreezeap, layernewab, alumbarrels, layerseta, layerfreezeab)
    return one
ChlorineStock :=
    layernewcp ← layer_new("chlorineplatform")
    chlorineplatform ← StockPlatform(chlorineplat_origin, chlorineplat_dim, chlorineplatcol_dim)
    layersetc ← layer_set("0")
    layerfreezecp ← layer_freeze("chlorineplatform")
    layernewcb ← layer_new("chlorinebarrels")
    chlorinebarrels ← StockBarrels(chlorineplat_origin, S_Drum, T_Cp, W_CpWalkway, D_Drum/2, H_Drum)
    layerfreezecb ← layer_freeze("chlorinebarrels")
    one ← stack(layernewcp, chlorineplatform, layersetc, layerfreezecp, layernewcb, chlorinebarrels, layersetc, layerfreezecb)
    return one
TotalPlatform := stack(Platform, alumstock, chlorinestock)
# [component: inputs TotalPlatform]
