# Automated Design: AutoCAD:Sludge Drain Cover
# [reference: MasterProgram.xmcd]
# [reference: basics.xmcd]
W_Sed := 1.6 m
W_SedSludge := 0.16 m
ID_SedSludge := 0.016 m
N_SedSludgeOrifices := 63
L_Sed := 9.528 m
AN_SedTopInlet = 60 deg
B_SedSludgeOrifices = 0.15 m
T_SedSludge = 0.0933013 m
N_SedSludgeOrifices = 63
T_SedInletSlope = 0.05 m
H_SedSludge = 0.12 m
L_Sed = 9.528 m
W_SedSludge = 0.16 m
W_SedDrainCover = 0.21547 m
ID_SedSludge = 0.016 m
W_Sed = 1.6 m
# Origins
DrainCover_origin := [Plant_Origin[0]; Plant_Origin[1] + W_Sed/2 - W_SedDrainCover/2; Plant_Origin[2]] = [0; 0.692265; 0] m
Notch_origin := [DrainCover_origin[1] + W_SedDrainCover - 0.025 m; T_SedSludge] = [0.882735; 0.0933013] m
Draincoverscript :=
    viewtops ← viewtop1
    layer1 ← layer_new("draincover", red)
    box1 ← box(DrainCover_origin, [-L_Sed; W_SedDrainCover; T_SedSludge] + [DrainCover_origin[0]; DrainCover_origin[1]; DrainCover_origin[2]])
    layerset ← layer_set("0")
    layerfreeze ← layer_freeze("draincover")
    one ← stack(viewtops, layer1, box1, layerset, layerfreeze)
    return one
Orificescript :=
    viewtops ← viewtop1
    local ← layer_new("draincoverhole", red)
    cylinder1 ← cylinderC(DrainCover_origin + [-L_Sed + B_SedSludgeOrifices; W_SedDrainCover/2; 0], ID_SedSludge/2, T_SedSludge)
    viewtops2 ← viewtop1
    layerset2 ← layer_set("0")
    layerfreeze2 ← layer_freeze("draincover")
    cylinders ← array_all(1, 63, B_SedSludgeOrifices)
    union1 ← union_allA
    layerthaw1 ← layer_thaw("draincover")
    viewtops3 ← viewtop1
    holes ← subtractD(DrainCover_origin, DrainCover_origin + [-L_Sed + B_SedSludgeOrifices + ID_SedSludge/2; W_SedDrainCover/2; 0])
    one ← stack(viewtops, local, cylinder1, viewtops2, cylinders, union1, layerthaw1, viewtops3, holes)
    return one
Notchscript :=
    view1 ← viewrightside1
    layerset3 ← layer_set("draincover")
    notch1 ← pline(Notch_origin, [
        Notch_origin[0] - (T_SedInletSlope*cos(AN_SedTopInlet)^2);
        Notch_origin[1] - cos(AN_SedTopInlet)*T_SedInletSlope
    ], [Notch_origin[0] - (T_SedInletSlope*(cos(AN_SedTopInlet)^2 + sin(AN_SedTopInlet))); Notch_origin[1]])
    notch2 ← pline([Notch_origin[0] - W_SedDrainCover + 0.05 m; Notch_origin[1]], [
        Notch_origin[0] - W_SedDrainCover + 0.05 m + T_SedInletSlope*cos(AN_SedTopInlet)^2;
        Notch_origin[1] - cos(AN_SedTopInlet)*T_SedInletSlope
    ], [
        Notch_origin[0] - W_SedDrainCover + 0.05 m + T_SedInletSlope*(cos(AN_SedTopInlet)^2 + sin(AN_SedTopInlet));
        Notch_origin[1]
    ])
    notchl1 ← extrude([
        Notch_origin[0] - (T_SedInletSlope*cos(AN_SedTopInlet)^2);
        Notch_origin[1] - cos(AN_SedTopInlet)*T_SedInletSlope
    ], -L_Sed)
    notchl2 ← extrude([
        Notch_origin[0] - W_SedDrainCover + 0.05 m + T_SedInletSlope*cos(AN_SedTopInlet)^2;
        Notch_origin[1] - cos(AN_SedTopInlet)*T_SedInletSlope
    ], -L_Sed)
    layerset4 ← layer_set("0")
    hole1 ← subtractD([DrainCover_origin[1]; Notch_origin[1]], [
        Notch_origin[0] - (T_SedInletSlope*cos(AN_SedTopInlet)^2);
        Notch_origin[1] - cos(AN_SedTopInlet)*T_SedInletSlope
    ])
    hole2 ← subtractD([DrainCover_origin[1]; Notch_origin[1]], [
        Notch_origin[0] - W_SedDrainCover + 0.05 m + T_SedInletSlope*cos(AN_SedTopInlet)^2;
        Notch_origin[1] - cos(AN_SedTopInlet)*T_SedInletSlope
    ])
    one ← stack(view1, layerset3, notch1, notch2, notchl1, notchl2, layerset4, hole1, hole2)
    return one
DrainCover := stack(Draincoverscript, Orificescript, Notchscript)
# [component: inputs DrainCover]
