# [reference: basics - Copy.xmcd]
# [reference: pipe - Copy.xmcd]
# [reference: PipeDatabase.xmcd]
Teescript1(p1, p2, p3, p4, p5, p7, p8, p9, p10, p11, p12, ND, R1, R2, R3, L, H, win1, win2, EN) :=
    viewtop ← viewtop
    zoom_win ← zoom_wina(win1, win2)
    pipe1 ← Pipe(p1, ND, L, EN)
    pipe2 ← Pipe(p2, ND, L/2, EN)
    rotate1 ← rotate_3d(p3, p2, "y", 90)
    union1 ← unionA(p4, p5)
    cylinder1 ← cylinderA(p1, R2, L)
    subtract1 ← subtractA(p4, p3)
    cylinder5 ← cylinderC(p1, R3, -H)
    cylinder6 ← cylinderA(p1, R1, -H)
    subtract3 ← subtractA(p7, p8)
    viewfront ← viewfront
    mirror1 ← mirrorA(p9, p10, p11)
    mirror2 ← mirrorA(p9, p10, p12)
    bigunion1 ← union_allA
    one ← concat(viewtop, zoom_win, pipe1)
    two ← concat(pipe2)
    three ← concat(rotate1)
    four ← concat(union1, cylinder1, zoomA)
    five ← concat(subtract1, cylinder5)
    six ← concat(cylinder6, viewtop, subtract3, viewfront1)
    seven ← concat(mirror1, mirror2, zoomA)
    eight ← concat(bigunion1)
    return stack(one, two, three, four, five, six, seven, eight)
# p1 | p2 | p3 | p4 | p5 | p7 | p8 | p9 | p10 | p11 | p12
Tee1(origin, ND, R1, R2, R3, L, H, EN) := Teescript1([origin[0]; origin[1]; origin[2]], [origin[0]; origin[1]; origin[2] + L/2], [origin[0] + innerD(ND, EN)/2; origin[1]; origin[2] + L/2], [origin[0] - R1; origin[1]; origin[2]], [origin[0] + L/2; origin[1] + R1; origin[2] + L/2], [origin[0] - R3; origin[1]; origin[2]], [origin[0] - R1; origin[1]; origin[2]], [origin[0]; origin[2] - H; -origin[1] - R3], [origin[0]; origin[2] + L/2], [origin[0] + zc; origin[2] + L/2 - zc], [origin[0] + zc; origin[2] + L/2], ND, R1, R2, R3, L, H, [origin[0] - (L/2 + H); origin[1] - R3; origin[2]], [origin[0] + (L/2 + H); origin[1] + R3; origin[2]], EN)
Tee(origin, ND, EN) := Tee1(origin, ND, outerradius(ND), innerD(ND, EN)/2, ConRadius(ND), ShortTeeLength(ND)*2, SocketDepth(ND), EN)
Drawing_Tee := Tee([50; -57; 3]*m, 2 in, 4)
# [component: inputs Drawing_Tee]
