# Pipescript is the main function that creates the list of commands. The function was created by drawing the rapid mixer in AutoCAD and translating that sequence of commands into a text file. That text file was then used as the basis for this function. Pipescript creates rows of text for each command and then stacks them together. The sequence is: draw the outer cylinder for the pipe, draw the inner cylinder for the pipe, subtract the inner from the outer, draw the connector, rotate, draw one set of elements, rotate, and then draw the set of perpendicular elements.
elbowscript(a, b, c, d, e, f, g, h, i, j, k, l, m, n, o, p, q, r, s, t, R1, R2, R3, R4, H1, win1, win2) :=
    viewtop ← viewtop
    zoom_win ← zoom_wina(win1, win2)
    torus_big ← torus(a, R1, R2)
    box1 ← box(b, c)
    subtract1 ← subtractD(d, a)
    torus_small ← torus(a, R1, R3)
    subtract2 ← subtractA(d, e)
    box2 ← box(f, g)
    subtract3 ← subtractD(h, a)
    outercylinder ← cylinderB(i, R4, j)
    innercylinder ← cylinderB(i, R2, j)
    subtract4 ← subtractH(k, l, m)
    mirror ← mirrorA(n, o, p)
    bigunion ← bigunion_elbow(a, q, r, R1, R2)
    one ← concat(viewtop, zoom_win, torus_big, box1, sp, subtract1)
    two ← concat(torus_small, subtract2, box2, sp, subtract3)
    three ← concat(outercylinder, innercylinder, subtract4)
    four ← concat(mirror, bigunion)
    return stack(one, two, three, four)  # error: This variable is undefined.
# Command Explanations:
# viewtop: orients the drawing properly
# outercylinder: draws a cylinder with the specified diameter plus pipe wall thickness
# innercylinder: draws a cylinder with the specified diameter
# zoom: zooms extents to allow for proper selection for subtraction
# subtract: subtracts the inner cylinder from the outer cylinder to form a pipe
# connector: draws a cylinder with the specified connector diameter
# viewleft: changes the viewport. This effectively rotates the pipe to draw the elements more easily.
# elementone: draws a cylinder to form the first element with specified diameter and length equal to the inner diameter.
# number: finds the number of elements. Halves these elements because there are two sets of elements.
# copyone: copies the first element and displaces it in increasing increments of Δxelem
# viewfront: changes the viewport. This effectively rotates the pipe to draw the elements perpendicular to the first set.
# elementtwo: draws a cylinder to form the second element with specified diameter and length equal to the inner diameter.
# copytwo: copies the second element and displaces it in increasing increments of  Δxelements
# shade: gourad shades the drawing
# stack: stacks the commands to be placed into a text file to form the AutoCAD script
elbow(o, pipe_inr) := elbowscript([o[0]; o[1]; o[2]], [
    o[0] - (ElbowRadius(2*pipe_inr) + ConRadius(2*pipe_inr));
    o[1] - (ElbowRadius(2*pipe_inr) + ConRadius(2*pipe_inr));
    o[2] - (outerradius(2*pipe_inr) + SocketDepth(2*pipe_inr))
], [
    o[0];
    o[1] + ElbowRadius(2*pipe_inr) + ConRadius(2*pipe_inr);
    (o[2] + outerradius(2*pipe_inr)) + SocketDepth(2*pipe_inr)
], [o[0] + ElbowRadius(2*pipe_inr) + outerradius(2*pipe_inr); o[1]; o[2]], [o[0] - ElbowRadius(2*pipe_inr) - pipe_inr; o[1]; o[2]], [o[0]; o[1] - ElbowRadius(2*pipe_inr) - outerradius(2*pipe_inr) - zc; o[2] - ConRadius(2*pipe_inr)], [o[0] + ElbowRadius(2*pipe_inr) + outerradius(2*pipe_inr) + zc; o[1]; o[2] + ConRadius(2*pipe_inr)], [o[0]; o[1] + ElbowRadius(2*pipe_inr); o[2]], [o[0]; o[1] + ElbowRadius(2*pipe_inr); o[2]], [o[0] - SocketDepth(2*pipe_inr); o[1] + ElbowRadius(2*pipe_inr); o[2]], [o[0]; o[1] + ElbowRadius(2*pipe_inr) - ConRadius(2*pipe_inr); o[2]], [
    o[0] - SocketDepth(2*pipe_inr) - zc;
    o[1] + ElbowRadius(2*pipe_inr) - outerradius(2*pipe_inr);
    o[2]
], [o[0] + zc; o[1] + ElbowRadius(2*pipe_inr) + outerradius(2*pipe_inr); o[2]], [o[0] - SocketDepth(2*pipe_inr); o[1] + ElbowRadius(2*pipe_inr) - ConRadius(2*pipe_inr); o[2]], [o[0]; o[1]], [o[0] + zc; o[1] + zc], [o[0] + ElbowRadius(2*pipe_inr); o[1] - SocketDepth(2*pipe_inr); o[2]], [o[0] - SocketDepth(2*pipe_inr); o[1] + ElbowRadius(2*pipe_inr); o[2]], [
    o[0] + ElbowRadius(2*pipe_inr) + ConRadius(2*pipe_inr) + zc;
    o[1] - ElbowRadius(2*pipe_inr) - ConRadius(2*pipe_inr) - zc;
    o[2]
], [
    o[0] - ElbowRadius(2*pipe_inr) - ConRadius(2*pipe_inr) - zc;
    o[1] + ElbowRadius(2*pipe_inr) + ConRadius(2*pipe_inr) + zc;
    o[2]
], ElbowRadius(2*pipe_inr), outerradius(2*pipe_inr), pipe_inr, ConRadius(2*pipe_inr), SocketDepth(2*pipe_inr), [
    o[0] - ElbowRadius(2*pipe_inr) - ConRadius(2*pipe_inr) - zc;
    o[1] - ElbowRadius(2*pipe_inr) - ConRadius(2*pipe_inr) - zc;
    o[2]
], [
    o[0] + ElbowRadius(2*pipe_inr) + ConRadius(2*pipe_inr) + zc;
    o[1] + ElbowRadius(2*pipe_inr) + ConRadius(2*pipe_inr) + zc;
    o[2]
])  # error: This variable is undefined.
# a | b | c | d | e | f | g | h | i | j | k | l | m
# n | o | p | q | r | s | t
Drawing_elbow := elbow([2; -.67; 28]*m, 4 in)  # error: This variable is undefined.
# [component: inputs Drawing_elbow]
