# Automated Design: AutoCAD: Flocculation Tank
# References
# [reference: basics.xmcd]
# [reference: inputs.xmcd]
# [reference: tank.xmcd]
# [reference: lamina.xmcd]
# Dimensions
totalfloc_dim := [
    floc_dim[0]/numfloc_tanks;
    (numfloc_tanks*floc_dim[1]) + ((numfloc_tanks - 1)*tank_thick);
    floc_dim[2]
]
wall_dim := [totalfloc_dim[0] + (2*tank_thick); tank_thick; totalfloc_dim[2]]
# Origin Points
floc_origin := [tank_origin[0]; tank_origin[1] + num_tanks*(tank_dim[1] + tank_thick); tank_origin[2]]
wall_origin := [
    tank_origin[0] - floc_dim[0] - tank_thick;
    tank_origin[1] + num_tanks*(tank_dim[1] + tank_thick) + floc_dim[1];
    tank_origin[2]
]
hole_origin := [
    tank_origin[0] - flochole_dim[0];
    tank_origin[1] + num_tanks*(tank_dim[1] + tank_thick) + floc_dim[1];
    tank_origin[2]
]
baffletank1_origin := [
    tank_origin[0] - tank_dim[0];
    tank_origin[1] + num_tanks*(tank_dim[1] + tank_thick) + floc_dim[1] + wall_dim[1];
    tank_origin[2]
]
baffletank2_origin := [
    tank_origin[0] - tank_dim[0];
    tank_origin[1] + num_tanks*(tank_dim[1] + tank_thick);
    tank_origin[2]
]
# Flocculation Tank Script
Floctankscript1 :=
    layer1 ← layer_new("floctank", dkgrey)
    tank1 ← Tank(floc_origin, totalfloc_dim, tank_thick)
    box1 ← box(wall_origin, [wall_origin[0] + wall_dim[0]; wall_origin[1] + wall_dim[1]; wall_origin[2] + wall_dim[2]])
    box2 ← box(hole_origin, [
        hole_origin[0] + flochole_dim[0];
        hole_origin[1] + flochole_dim[1];
        hole_origin[2] + flochole_dim[2]
    ])
    subtract0 ← subtractD([hole_origin[0] + flochole_dim[0] + tank_thick; hole_origin[1]; hole_origin[2]], hole_origin)
    union1 ← unionC([
        floc_origin[0] - totalfloc_dim[0] - tank_thick - zc;
        floc_origin[1] - tank_thick - zc;
        floc_origin[2]
    ], [
        floc_origin[0] + tank_thick + zc;
        floc_origin[1] + totalfloc_dim[1] + tank_thick + zc;
        floc_origin[2]
    ])
    box3 ← box([
        floc_origin[0] - totalfloc_dim[0];
        floc_origin[1] - tank_thick;
        floc_origin[2] + totalfloc_dim[2] - channel_dim[2]
    ], [
        floc_origin[0] - totalfloc_dim[0] + channel_dim[1];
        floc_origin[1];
        (floc_origin[2] + totalfloc_dim[2])
    ])
    subtract1 ← subtractD(floc_origin, [
        floc_origin[0] - floc_dim[0];
        floc_origin[1] - tank_thick;
        floc_origin[2] + floc_dim[2] - channel_dim[2]
    ])
    layerset ← layer_set("0")
    layerfreeze1 ← layer_freeze("floctank ")
    one ← stack(layer1, tank1, box1, box2, subtract0, union1, box3, subtract1, layerset, layerfreeze1)
    return one
Floctankscript2 :=
    local ← layer_new("baffle", ltpurple)
    for i ∈ 1 .. baffletank1_num
        baffle1_origin[i] ← baffletank1_origin + [baffletank1_location[i - 1, 0]; 0; baffletank1_location[i - 1, 1]]
        baffletank1_length[i] ← baffletank1_location[i - 1, 2]
        local ← stack(local, lamina(baffle1_origin[i], baffle_amp, baffle_width, baffletank1_length[i], baffle_thick, baffle_periods, baffle_slope, baffle_num, baffle_col, baffle_x, baffle_y))
    local
Floctankscript3 :=
    local ← lamina(baffletank2_origin + [baffletank2_location[0, 0]; 0; baffletank2_location[0, 1]], baffle_amp, baffle_width, baffletank2_location[0, 2], baffle_thick, baffle_periods, baffle_slope, baffle_num, baffle_col, baffle_x, baffle_y)
    for i ∈ 1 .. baffletank2_num - 1
        baffle2_origin[i] ← baffletank2_origin + [baffletank2_location[i, 0]; 0; baffletank2_location[i, 1]]
        baffletank2_length[i] ← baffletank2_location[i, 2]
        local ← stack(local, lamina(baffle2_origin[i], baffle_amp, baffle_width, baffletank2_length[i], baffle_thick, baffle_periods, baffle_slope, baffle_num, baffle_col, baffle_x, baffle_y))
    layerset ← layer_set("0")
    layerfreeze2 ← layer_freeze("baffle")
    one ← stack(local, layerset, layerfreeze2)
    one
Floctank := stack(Floctankscript1, Floctankscript2, Floctankscript3)
Drawing_Floctank := Floctank
# [component: inputs Drawing_Floctank]
