# [reference: basics.xmcd]
clear := "_erase all "
new := "new ."  # to create a new window
viewwire := "_shademode _3"
viewisoshade := "_-view swiso _shade"  # to view a shaded isometric drawing
display := [viewisoshade]
lamina(origin, amp, w, l, t, periods, angle, num_baffles, num_bafflecols, xspace, yspace) :=
    lamina[0] ← concat(zoom_wina([origin[0] - w - zc; origin[1]; origin[2]], [origin[0] + w + zc; origin[1] + l + zc; origin[2]]), "spline")
    for i ∈ 0 .. periods*4
        lamina_last ← origin + [sin(π/2*i)*amp; i*w/(periods*4); 0]
        lamina[i + 1] ← point(lamina_last)
    lamina[i + 2] ← concat(sp, point(origin - zc_point))
    lamina[i + 3] ← point(lamina_last + zc_point)
    lamina[i + 4] ← "offset"
    lamina[i + 5] ← stringit(t)
    lamina[i + 6] ← point(origin)
    lamina[i + 7] ← point(origin + [t; 0; 0])
    line[0] ← concat(point(origin), sp, point(origin + [t; 0; 0]))
    line[1] ← concat(point(lamina_last), sp, point(lamina_last + [t; 0; 0]))
    lamina[i + 8] ← concat(sp, "line", sp, line[0], sp)
    lamina[i + 9] ← concat("line", sp, line[1], sp)
    lamina[i + 10] ← concat("z e region w", sp, point(origin - [amp; 0; 0]), sp, point(lamina_last + [t + amp; 0; 0]), sp)
    lamina[i + 11] ← concat("extrude", sp, point(origin), sp, sp, stringit(l))
    lamina[i + 12] ← concat("rotate3d", sp, point(origin), sp, sp, "y", sp, point(origin), sp, num2str(90 - angle/deg)) if angle ≠ 90 deg
    lamina[i + 13] ← concat("-array", sp, point(origin), sp, sp, "R", sp, num2str(num_bafflecols), sp, num2str(num_baffles), sp)
    lamina[i + 14] ← concat(stringit(xspace)) if num_baffles > 1
    lamina[i + 14] ← "" otherwise
    lamina[i + 15] ← concat(stringit(yspace)) if num_bafflecols > 1
    lamina[i + 15] ← "" otherwise
    lamina[i + 16] ← " z e"
    lamina
# [component: inputs lamina(lamina_origin, lamina_amp, lamina_width, lamina_length, lamina_thick, lamina_periods, 90 deg, 1, lamina_col, lamina_x, lamina_y)]
