# [reference: basics.xmcd]
# [reference: inputs.xmcd]
Platformscript1(grey, platform1_origin, platform2_origin, column1_origin, column2_origin, column3_origin, platform1_dim, platform2_dim, column_dim) :=
    layer1 ← layer_new("platform", grey)
    box1 ← box(platform1_origin, [
        platform1_origin[0] + platform1_dim[0];
        platform1_origin[1] + platform1_dim[1];
        platform1_origin[2] + platform1_dim[2]
    ])
    box2 ← box(platform2_origin, [
        platform2_origin[0] + platform2_dim[0];
        platform2_origin[1] + platform2_dim[1];
        platform2_origin[2] + platform2_dim[2]
    ])
    box3 ← box(column1_origin, [
        column1_origin[0] - column_dim[0];
        column1_origin[1] - column_dim[1];
        column1_origin[2] - column_dim[2]
    ])
    box4 ← box(column2_origin, [
        column2_origin[0] - column_dim[0];
        column2_origin[1] - column_dim[1];
        column2_origin[2] - column_dim[2]
    ])
    box5 ← box(column3_origin, [
        column3_origin[0] - column_dim[0];
        column3_origin[1] - column_dim[1];
        column3_origin[2] - column_dim[2]
    ])
    union1 ← union_allA
    layerset ← layer_set("0")
    layerfreeze1 ← layer_freeze("platform")
    one ← stack(layer1, box1, box2, box3, box4, box5, union1, layerset, layerfreeze1)
    return ← one
Platform(grey, tank_origin, tank_dim, floc_dim, channel_dim, column_dim, lvltank_dim, tank_thick, channel_thick, lvltank_thick, platform_thick, walkway_width, num_tanks, r_drum, drum_disp) := Platformscript1(grey, [
    tank_origin[0] + tank_thick;
    tank_origin[1] + (num_tanks*tank_dim[1]) + ((num_tanks + 2)*tank_thick) + 2*floc_dim[1];
    tank_origin[2] + tank_dim[2] - channel_dim[2] - platform_thick
], [
    tank_origin[0] - tank_dim[0] - tank_thick;
    tank_origin[1] - tank_thick;
    tank_origin[2] + tank_dim[2] - channel_dim[2] - platform_thick
], [
    tank_origin[0] + tank_thick;
    tank_origin[1] + (num_tanks*tank_dim[1]) + ((num_tanks + 2)*tank_thick) + 2*floc_dim[1] + walkway_width;
    tank_origin[2] + tank_dim[2] - channel_dim[2] - channel_thick
], [
    tank_origin[0] - tank_dim[0] - tank_thick - walkway_width - grit_dim[0] - 2*grit_thick - ShortTeeLength(gritpipe_inr) - outerradius(gritpipe_inr) - 4*r_drum - 3*drum_disp + column_dim[0];
    tank_origin[1] + (num_tanks*tank_dim[1]) + ((num_tanks + 2)*tank_thick) + 2*floc_dim[1] + walkway_width;
    tank_origin[2] + tank_dim[2] - channel_dim[2] - channel_thick
], [
    tank_origin[0] - tank_dim[0] - tank_thick - walkway_width - grit_dim[0] - 2*grit_thick - ShortTeeLength(gritpipe_inr) - outerradius(gritpipe_inr) - 4*r_drum - 3*drum_disp + column_dim[0];
    tank_origin[1] - tank_thick + column_dim[1];
    tank_origin[2] + tank_dim[2] - channel_dim[2] - channel_thick
], [-(tank_dim[0] + 2*tank_thick); walkway_width; platform_thick], [
    -(walkway_width + lvltank_dim[0] + 2*lvltank_thick + 4*r_drum + 3*drum_disp + ShortTeeLength(gritpipe_inr) + outerradius(gritpipe_inr) + walk_space);
    tank_origin[1] + (num_tanks*tank_dim[1]) + ((num_tanks + 2)*tank_thick) + 2*floc_dim[1] + walkway_width + tank_thick;
    platform_thick
], column_dim)
# platform1_origin | platform2_origin | column1_origin | column2_origin | column3_origin | platform1_dim | platform2_dim
Drawing_Platform := Platform(grey, tank_origin, tank_dim, floc_dim, channel_dim, column_dim, lvltank_dim, tank_thick, channel_thick, lvltank_thick, platform_thick, walkway_width, num_tanks, r_drum, drum_disp)
# [component: inputs Drawing_Platform]
