# [reference: basics.xmcd]
# [reference: inputs.xmcd]
# platform origin=bottom nw corner
Stock1_script(grey, platform_origin, column1_origin, column2_origin, column3_origin, column4_origin, barrel1_origin, barrel2_origin, platform_dim, column_dim, R, H_barrel, walkway_width) :=
    layer1 ← layer_new("stplatform1", grey)
    box1 ← box(platform_origin, [
        platform_origin[0] - platform_dim[0];
        platform_origin[1] - platform_dim[1];
        platform_origin[2] + platform_dim[2]
    ])
    box2 ← box(column1_origin, [
        column1_origin[0] + column_dim[0];
        column1_origin[1] - column_dim[1];
        column1_origin[2] - column_dim[2]
    ])
    box3 ← box(column2_origin, [
        column2_origin[0] - column_dim[0];
        column2_origin[1] - column_dim[1];
        column2_origin[2] - column_dim[2]
    ])
    box4 ← box(column3_origin, [
        column3_origin[0] + column_dim[0];
        column3_origin[1] + column_dim[1];
        column3_origin[2] - column_dim[2]
    ])
    box5 ← box(column4_origin, [
        column4_origin[0] - column_dim[0];
        column4_origin[1] + column_dim[1];
        column4_origin[2] - column_dim[2]
    ])
    union1 ← union_allA
    layer2 ← layer_new("barrel1", blue2)
    cylinder1 ← cylinderC(barrel1_origin, R, H_barrel)
    cylinder2 ← cylinderC(barrel2_origin, R, H_barrel)
    layerset ← layer_set("0")
    layerfreeze1 ← layer_freeze("stplatform1")
    layerfreeze2 ← layer_freeze("barrel1")
    one ← stack(layer1, box1, box2, box3, box4, box5, zoomA, union1, layerset, layer2, cylinder1, cylinder2, layerset, layerfreeze1, layerfreeze2)
    return ← one
# platform1_dim | platform2_dim
Stock1(grey, platform_origin, platform_dim, column_dim, R, H_barrel, walkway_width) := Stock1_script(grey, platform_origin, [platform_origin[0] - platform_dim[0]; platform_origin[1]; platform_origin[2]], platform_origin, [platform_origin[0] - platform_dim[0]; platform_origin[1] - platform_dim[1]; platform_origin[2]], [platform_origin[0]; platform_origin[1] - platform_dim[1]; platform_origin[2]], [
    platform_origin[0] - platform_dim[0]/4;
    platform_origin[1] - platform_dim[1]/2;
    platform_origin[2] + platform_dim[2]
], [
    platform_origin[0] - (3*platform_dim)[0]/4;
    platform_origin[1] - platform_dim[1]/2;
    platform_origin[2] + platform_dim[2]
], platform_dim, column_dim, R, H_barrel, walkway_width)
Drawing_Stock1 := Stock1(grey, [10; -20; 5]*m, [20; 10; 1]*m, [2; 2; 10]*m, 3.5 m, 8 m, walkway_width*m)
# [component: inputs Drawing_Stock1]
