w_Plate := 30 cm
V_Up := 70*m/day
w_Sed := 42.5 in
Q := V_Up*w_Sed/2*w_Plate
Π_cell := 2
K := 1  # for kinetic energy lost when a jet enters a reservoir (this neglects effect of the vena contracta)
ν := 1 mm^2/s
G := 20/s  # at the end of the floc tank
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ε := G^2*ν = 0.4 mW/kg
# The solution needs to be iterative in order to incorporate
# the how the width of the manifold changes based on the width
# of the space between ports
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# This equation is different than the one preivously used but the derivation
# should be the same.... check this
b_Venacontracta := (K*Q^3/(2*Π_cell*ε))^(1/7) = 5.44068 cm
# Why is the vena contracta taken into account separately?
# But this solution doesn't take into account the vena contracta through the port. Assume the vena contracta area is 0.6 and increase the
# Ports are assumed to be square. Why? this doesn't seem necessary
# The only issue that coould arise is that the height of the ports really shouldn't
# be greater than the height of the rectangular/vertical piece of the manifold.
b := b_Venacontracta/sqrt(0.6) = 7.02389 cm
0.6*b^2 == b_Venacontracta^2
# Thus the ports should be 7 cm by 7 cm. The ports should also be staggered so that they alternate from side to side to minimize the dead zones in the bottom of the tank.
# We need to design the size of the sludge drain orifices. The orifices should be in all of the dead zones between the ports. The total area of the orifices should be approximately 1/4 of the area of the rectangular sludge manifold (which I have suggested is 5 cm deep and 10 cm wide).
