# [reference: MasterProgram - 4 communities.xmcd]
# Area Change Assessment
A_Trapezoid = 0.13261 m^2
A_triangle := 0.5*W_Trapezoid*tan(50 deg)*W_Trapezoid - 0.5*W_Trapezoid^2*tan(10 deg) = 0.0975445 m^2
L_Sed = 3.48992 m
A_Lost := A_Trapezoid - A_triangle = 0.0350657 m^2
sqrt(A_Lost) = 18.7258 cm
N_SedPorts*W_SedPort = 0.731115 m
sqrt(A_Trapezoid) = 36.4157 cm
Ratio := A_Lost/A_Trapezoid = 0.264427
