# Velocities for the entrance channel, connections to the triangular manifolds, and triangular manifolds are all constrained to not break up flocs and to minimize floc sedimentation. It may be impossible to meet these two constraints simultaneously. Thus the channels should be designed so they can be cleaned easily or the perhaps the channels should be sloped to a drain where flocs can be removed.
Q_Tamara := 175*gal/min
Q_Tamara = 662.447 L/min
# Schultz and Okun seem to recommend 5 cm/s for channels.
# Water Treatment Plant Design suggests 15 cm/s
n_pipes := 4*3 = 12
# At the design flow rate of 175 gpm (660 L/min) the velocity in the pipes delivering water into the sed tanks at Tamara is 5 cm/s. We experienced failure in these pipes when the plant flow rate was significantly reduced.  I understand that the actual flow rate was close to a third of the design flow rate when failure occurred and thus the velocity during failure was likely less than 2 cm/s  The failure was likely due to sedimentation in the horizontal sections of the pipe. This suggests that inaccesible conduits with horizontal bottoms should always have a velocity higher than 5 cm/s.
#
# If we aim for a G value of 10/s we can estimate a channel velocity as well. First, calculate the corresponding energy dissipation rate. We can't actually calculate a velocity without knowing the dimension of flow because it is the energy dissipation rate that is the constraint, not a velocity.
A_pipes := π*(6 in)^2/4
V_Tamara := Q_Tamara/(n_pipes*A_pipes) = 5.04381 cm/s
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ν := 1*mm^2/s
ε_min := (10/s)^2*ν = 0.1 mW/kg
# This assumes a K value of 1. This is equivalent to saying that all of the kinetic energy contained in the flow will be dissipated over a length scale of 2 times the smallest dimension of flow.
Π_cell := 2
K := 1
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d(Q, K) := (32*K*Q^3/(Π_cell*π^3*ε_min))^(1/7)
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V_channel(Q, K) := Q/(π*d(Q, K)^2/4)  # Assumes circular geometry for simplicity
Q := 10*L/min, 20*L/min .. 100000*L/min
# Although the available guidelines reference a velocity, it is clear that the energy dissipation rate is the fundamental parameter that relates to floc breakup. Thus a better guideline would hold the energy dissipation rate constant. The results of this guideline are shown below with (ε_min = 0.1 mW/kg).
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# We can use these equations to see what diameter of pipe is required for the entrance into the sedimentation tanks at Gracias.
Q_plant := 380*L/min  # half of the total design flow for one treatment train
K_90 := 2
ε := 0.4*mW/kg
G := sqrt(ε/ν) = 20 1/s
# Each port will be square and will provide the flow for that length of the sed tank
w_platesettler := 1.08 m
w_triangle := w_platesettler/2 = 0.54 m
V_up := 70*m/day
h_rectangle := 10 cm
A_triangle := 1/2*w_triangle^2*(tan(60 deg) - tan(30 deg)) + h_rectangle*w_triangle = 0.222355 m^2
Q_port := V_up*w_triangle*Π_port*h_port  # error: This variable is undefined.  # 2 for ports that are staggered with 50% open
h_port := (K_90*Q_port^3/(2*Π_cell*ε))^(1/7)  # error: This variable is undefined.
h_port := (K_90*(V_up*w_triangle*Π_port*h_port)^3/(2*Π_cell*ε))^(1/7)  # error: This variable is undefined.
h_port/h_port^(3/7) := (K_90*(V_up*w_triangle*Π_port)^3/(2*Π_cell*ε))^(1/7)  # error: A name is required here.
# Suppose I make the ports larger (but further apart). Then I can have a higher velocity because the energy dissipation zone will be longer (it scales with the flow dimension).
Π_port := 10  # length of sed tank served by one port divided by port width
# I made this ten so that the Vport is closer to 5 cm/s
# Pi.port is equal to delta.port/width.port
# I assume square ports here
h_port := (K_90*(V_up*w_triangle*Π_port)^3/(2*Π_cell*ε))^(1/4) = 10.1149 cm
width_port := h_port
Δ_port := Π_port*width_port = 1.01149 m
V_port := V_up*w_triangle*Π_port*h_port/h_port^2 = 4.32531 cm/s
V_triangle := V_port/4 = 1.08133 cm/s
L_sed := V_triangle*A_triangle/(V_up*w_triangle) = 5.49574 m  # I think as long as the sed tanks are less than this number, we're good.
L_sedtotal := Q_plant/(V_up*w_triangle) = 14.4762 m
N_triangles := L_sedtotal/L_sed = 2.63407
N_tanks := 2
N_trianglespertank := ceil(N_triangles/N_tanks) = 2
N_triangles/N_tanks = 1.31704
