# Flocculation Function
# The Flocculator program should be calculating the spacing between baffles for all sections. the number of baffles in each section and the placement of the baffles throughout the flocculator.
# References:
# [reference: UserInputs- 4 Communities.xmcd]
# [reference: DesignAssumptions- 4 Communities.xmcd]
# [reference: MathFunctions.xmcd]
# [reference: PipeDatabase.xmcd]
# [reference: MinorLossCoefficients.xmcd]
# [reference: FluidsFunctions.xmcd]
# [reference: Sed. Inlet Slopes - 4 comm.xmcd]
# [reference: SludgeDrain-SetNumOrifices.xmcd]
# [reference: Sedimentation Dimensions.xmcd]
# [reference: Inlet Channel.xmcd]
# [reference: Launder.xmcd]
# [reference: Exit Channel.xmcd]
# [reference: Lamella.xmcd]
# [reference: FCM.xmcd]
Gt_FlocBod := 7000
L_Sed := 3.93 m
# The length of one channel of the flocculator is equal to the length of a sed tank . Therefore the total length is equal to the number of channels times the length of a sed tank. The width of a flocculator is equal to the width of a sed tank divided by the number of channels (to make "upward velocity" equal in the two tanks. The water depth at the end of the flocculaor must be the same as the water depth in the sed tank.
# Floc Calculations:
W_FlocChannel := W_Sed/2 = 0.53975 m
Q_FlocMax := W_FlocChannel*(HW_Sed/(2*Pi_FlocBaffle))^(4/3)*G_FlocBod[last(G_FlocBod)]^(2/3)*(2*Nu_Water*Pi_FlocDissipation/K_FlocBaffle180)^(1/3) = 1869.59 L/min
# This is the maximum flow rate that can be accomodated with this width and depth of channel. If the flow rate is greater than this value there will be short circuiting in the flocculator. This should somehow be implemented as a check in LabVIEW to guide the designer in setting the plant dimensions. Or maybe we need to develop an algorithm to set the channel width.
Q_Plant = 380 L/min  # Q.FlocMax should be compared to Q.plant which is the flow rate that will be in the flocculator
S_FlocBaffle := (1/G_FlocBod)^(1/2)*(K_FlocBaffle180*Q_Plant^3/(2*Pi_FlocDissipation*Nu_Water*W_FlocChannel^3))^(1/4) = [9.57755; 13.5447; 23.4601] cm
# calculates the baffle spacing based on desired G value
# B.FlocBaffle is measured from center to center and thus includes the thickness of the baffle.
B_FlocBaffle := S_FlocBaffle + T_FlocBaffle = [9.97755; 13.9447; 23.8601] cm
Gt_FlocBaffleMin := sqrt(Pi_FlocDissipation*Pi_QPlant*Q_Plant*K_FlocBaffle180/(2*Nu_Water*W_FlocChannel)) = 132.668
# Calculates the Gθ per baffle under low flow conditions
# What should this value be compared to? is it a check? it seems fairly low.
N_FlocBafflesMin := ceil(Gt_FlocBod/Gt_FlocBaffleMin) = 53
# Total number of baffles required to get the minimum Gθ. Based on Low flow conditions. Does this make our design overly conservative would an average G theta be better?
# Calculates the number of baffles in each section
N_FlocBaffleSection :=
    for i ∈ 0 .. last(G_FlocBod) - 1
        N[i] ← floor(N_FlocBafflesMin/length(G_FlocBod)) - 1
    N[last(G_FlocBod)] ← N_FlocBafflesMin - sum(N) + floor(3.0 m/B_FlocBaffle[last(G_FlocBod)])
    return N
    = [16; 16; 33]
# The baffles basically evenly distributed. Is there a better distribution
# that could be used?
# This solution was highly edited for
# 4 communities to ensure that headloss
# not greater than the plant freeboard of
# 10cm.
# Length of The Floc Tank needed to fit all the baffles
(N_FlocBaffleSection[0] + 1)*B_FlocBaffle[0] + (N_FlocBaffleSection[1] - 2)*B_FlocBaffle[1] = 3.64844 m
L_Sed - (13*B_FlocBaffle[2] + 3*B_FlocBaffle[1]) = 0.409844 m
L_Sed - 15*B_FlocBaffle[2] = 0.350983 m
# why is the width of the floc channel and the thickness of the
# channel wall accounted for here?
L_FlocTankEst := sum(vectorize(N_FlocBaffleSection*B_FlocBaffle)) = 11.7014 m
(W_FlocChannel + T_ChannelWall)
L_Sed/B_FlocBaffle[2] = 16.471
N_FlocChannels := ceil(L_FlocTankEst/L_Sed) = 3  # The number of channels in the flocculator
L_FlocTank := N_FlocChannels*L_Sed = 11.79 m  # Actual Length of the Floc Tank given each channel is the length of one sed tank.
V_Floc := Q_Plant/(W_FlocChannel*S_FlocBaffle) = [0.122514; 0.0866304; 0.0500161] m/s  # Not used, but for interest, here are the velocities at max flow
# This is actual Gtheta occuring in the flocculator
L_Sed = 3.93 m
Gt_FlocBaffleMin*sum(N_FlocBaffleSection) = 8623.41
HL_FlocBaffle := h_erect(Q_Plant, W_FlocChannel, S_FlocBaffle, K_FlocBaffle180) = [0.229584; 0.114792; 0.0382639] cm
# calculates the head loss per baffle and then finds the total headloss
# This head loss calculation is based on the ideal design that doesn't yet account for how the baffles are actually placed in the channels. The error will be small since it is the last section of baffle spacings that might have a different number of baffles
HL_Floc := sum(vectorize(N_FlocBaffleSection*HL_FlocBaffle)) = 6.77272 cm
# Calculate the water level at the entrance to the floc tank
HW_FlocStart := HW_Sed + HL_Floc = 1.61773 m
H_FlocFreeboard := H_Sed - HW_FlocStart = 3.22728 cm
# G at the port is based on the G at the end of the flocculator because the low G region of the flocculator is so long.
W_FlocPort := S_FlocBaffle[0] = 9.57755 cm  # This was changed check it!!
# Defining the width of the port based on the last spacing is incorrect becuase then there is a chance that a baffle will overlap the port.
H_FlocPort := W_FlocChannel*S_FlocBaffle[last(G_FlocBod)]*Pi_FlocBaffle/W_FlocPort = 1.32211 m
# This value cannot be larger than the waterdepth in the floc tank. which is the same as the water in the sed tank by the third section Check!
HW_Sed = 1.55 m
# Now we need to assign positions, lengths and elevations to floc baffles
L_FlocBaffleLower := HW_Sed - S_FlocBaffle*Pi_FlocBaffle = [1.45422; 1.41455; 1.3154] m
# This will lead to the gap being too large at the beginning of the flocculator.
L_FlocBaffleUpper := H_Sed - S_FlocBaffle*Pi_FlocBaffle = [1.55422; 1.51455; 1.4154] m
L_BaffleSection :=
    for i ∈ 0 .. last(N_FlocBaffleSection)
        L[i] ← N_FlocBaffleSection[i]*B_FlocBaffle[i]
    return L
    = [1.59641; 2.23115; 7.87384] m  # This calculates the length of flocculator taken up by each section of baffles
L_Sed = 3.93 m
L_Sed*3 = 11.79 m
L_BaffleSection[0] + L_BaffleSection[1] = 3.82756 m
L_Sed - (B_FlocBaffle[0]*N_FlocBaffleSection[0] + B_FlocBaffle[1]*N_FlocBaffleSection[1]) = 0.10244 m
3.93*2 = 7.86
# First baffle is a lower baffle because rapid mix pipe enters low
# Ideally have odd number of baffles in first channel (enter low, exit low)
# Ideally have even number of baffles in 2nd channel (enter low, exit high), but I haven't done any coding to get the right number of baffles (odd or even). The fit of the baffles could potentially be improved by
15*B_FlocBaffle[2] + B_FlocBaffle[2] = 3.81762 m
Loc_FlocBaffles :=
    X[0, N_FlocChannels - 1] ← 0 m
    L[0, N_FlocChannels - 1] ← 0 m
    Z[0, N_FlocChannels - 1] ← 0 m
    section ← 0
    BafflesInSection ← 0
    X[0, 0] ← W_FlocChannel + T_ChannelWall
    for Channel ∈ 0 .. N_FlocChannels - 1
        i ← 0
        X_FirstBaffleInChannel ← W_FlocChannel + T_ChannelWall if Channel == 0
        X_FirstBaffleInChannel ← W_FlocPort + S_FlocPort otherwise
        X[i, Channel] ← X_FirstBaffleInChannel
        L[i, Channel] ← L_FlocBaffleLower[section]
        Z[i, Channel] ← 0 m
        X_LastBaffleInChannel ← L_Sed - (W_InletChannel + S_FlocPort) if Channel == N_FlocChannels - 1
        X_LastBaffleInChannel ← L_Sed - (W_FlocPort + S_FlocPort) otherwise
        while X[i, Channel] + B_FlocBaffle[section] < X_LastBaffleInChannel
            i ← i + 1
            BafflesInSection ← BafflesInSection + 1
            if BafflesInSection == N_FlocBaffleSection[section] and section < last(G_FlocBod)
                section ← section + 1
                BafflesInSection ← 1
            X[i, Channel] ← X[i - 1, Channel] + B_FlocBaffle[section]
            if mod(i, 2) == 1
                L[i, Channel] ← L_FlocBaffleUpper[section]
                Z[i, Channel] ← S_FlocBaffle[section]*Pi_FlocBaffle
            otherwise
                L[i, Channel] ← L_FlocBaffleLower[section]
                Z[i, Channel] ← 0 m
        for k ∈ 0 .. last(X[:, 0])
            X[k, Channel] ← L_Sed - X[k, Channel] if mod(Channel, 2) == 1 and X[k, Channel] ≠ 0
    return [X, L, Z]
# section is index of the spacing of baffles
# First baffle is away from wall to allow elbow to deflect water downward
# This code works with any number of flocculator channels
# i is the number of baffles in a channel
# Each channel starts with a lower baffle
# Move to the next spacing if baffles in section equals target number of baffles in section and if the section isn't the last section
# Mod handles the odd and even baffles
# Reverse the direction of odd numbered channels
X_FlocBaffles := Loc_FlocBaffles[0, 0]
L_FlocBaffles := Loc_FlocBaffles[0, 1]
Z_FlocBaffles := Loc_FlocBaffles[0, 2]
N_FlocBaffles :=
    N ← 0
    i ← 0
    Channel ← 0
    for Channel ∈ 0 .. N_FlocChannels - 1
        for i ∈ 0 .. last(X_FlocBaffles[:, 0])
            N ← N + 1 if X_FlocBaffles[i, Channel] ≠ 0 m
    return N
Gt_FlocMinFlow := N_FlocBaffles*Gt_FlocBaffleMin = 7960.07
