# AguaClara Water Treatment Plants -- 4 Communities
# Automated Design
# User Inputs:
HW_Sed := 2.4 m
# Design References
# [reference: UserInputs- 4 Communities.xmcd]
# [reference: DesignAssumptions- 4 Communities.xmcd]
# [reference: MathFunctions.xmcd]
# [reference: PipeDatabase.xmcd]
# [reference: MinorLossCoefficients.xmcd]
# [reference: FluidsFunctions.xmcd]
# Sedimentation Tanks:
# [reference: Sedimentation 4 comm,.xmcd]
N_SedTanks = 2
H_SedBelowSlope = 1.03487 m
H_SedBetween = 0.0762 m
HW_Sed = 2.4 m
H_Sed = 2.5 m
H_SedBelow = 1.1714 m
L_Sed = 3.62072 m
# Inlet Channel:
# [reference: Inlet Channel.xmcd]
W_InletChannel = 0.259075 m
L_Channel = 2.459 m
ND_SedPipeEntrance = 8 in
N_SedInletPipes = 2
H_InletChannel = 1.31513 m
Q_Plant = 100.385 gal/min
# Sedimentation Tank Sludge Drain:
# [reference: SludgeDrain.xmcd]
N_SedSludgeOrifices = 36
ND_SedSludge = 3 in
Q_SludgeDrainInitial = 625.371 L/min
D_SedSludgeOrifice = 0.1875 in
# Sedimentation Tank Inlet Slopes:
# [reference: Sed. Inlet Slopes- minV.xmcd]
B_SedInlet = 1.90124 cm
L_SedTopFilled = -0.301701 m
H_SedInlet = 3.80249 cm
W_SlopesFilled = -0.15085 m
h_rectangle := 10 cm
L_SedBottomFilled = -0.174187 m
v_triangle := Q_SedInlet/A_SedInletTotal = 0.941343 cm/s
AN_SedTopInlet = 60 deg
L_SedTopInlet = 1.0795 m
A_SedInletTotal = 1681.99 cm^2
h_port := 10.115 cm
AN_SedBottom = 30 deg
Π_ports := 10
A_SedInlet = 2753.55 cm^2
H_SedTopSlope = 0.934874 m
width_port := h_port
A_SedInletActual = 1679.91 cm^2
Δ_port := Π_ports*width_port = 1.0115 m
A_Inlet = 1376.78 cm^2
L_SedBottom = 0.62325 m
Z_SedSlopes = 1.12377 m
n_ports := ceil(L_Sed/(Δ_port + width_port))
H_SedBottomSlope = 0.311625 m
n_ports = 4
L_SedTopInlet = 1.0795 m
W_SlopesOpen = 0.6906 m
v_port := Q_SedInlet/(n_ports*width_port*h_port) = 3.86884 cm/s
# Sedimentation Tank Effluent Launder:
# [reference: Launder.xmcd]
N_SedLaunderOrifices = 58
Q_SedLaunderOrifices = 1.63793 L/min
# Exit Channel:
# [reference: Exit Channel.xmcd]
W_ExitChannel = 0.259075 m
ND_SedLaunder = 3 in
H_ExitChannel = 1.31513 m
L_SedLaunder = 2.95257 m
L_ExitChannel = 2.459 m
D_SedLaunderOrifice = 0.3125 in
H_PltWeir = 1.13734 m
Z_SedLaunder = 2.31555 m
HW_ExitChannel = 1.17513 m
ZW_ExitChannel = 2.36 m
# Lamella:
# [reference: Lamella.xmcd]
L_SedPlate = 1.23683 m
B_SedPlate = 5.02226 cm
S_SedPlate = 4.72226 cm
N_SedPlates = 39
AN_SedPlate = 60 deg
V_SedC = 10.0226 m/day
V_SedUp = 70 m/day
H_SedPlate = 1.07113 m
H_SedAbove = 0.1289 m
# Flow Controller:
# [reference: FCM.xmcd]
N_Fcm = 1
ID_FcmTube = 3.175 mm
ID_FcmTube = 0.125 in
L_FcmTube = 99.0625 cm
Q_FcmTubeMax = 285 mL/min
HL_FcmValve = 15.0907 cm
# Flocculator:
# [reference: Flocculation.xmcd]
W_FlocChannel = 0.53975 m
S_FlocBaffle = [0.0814312; 0.0974128; 0.129144; 0.234601] m
B_FlocBaffle = [0.0854312; 0.101413; 0.133144; 0.238601] m
N_FlocBafflesMin = 53
HL_Floc = 9.191 cm
X_FlocBaffles = [
    0.68975, 3.37112, 0.249601;
    0.775181, 3.23798, 0.488202;
    0.860612, 3.10484, 0.726803;
    0.946044, 2.97169, 0.965404;
    1.03147, 2.83855, 1.20401;
    1.11691, 2.7054, 1.44261;
    1.20234, 2.57226, 1.68121;
    1.28777, 2.43912, 1.91981;
    1.3732, 2.30597, 2.15841;
    1.45863, 2.17283, 2.39701;
    1.54406, 1.93423, 2.63561;
    1.62949, 1.69563, 2.87421;
    1.71492, 1.45703, 3.11281;
    1.81634, 1.21843, 0;
    1.91775, 0.979824, 0;
    2.01916, 0.741223, 0;
    2.12058, 0.502622, 0;
    2.22199, 0.264021, 0;
    2.3234, 0, 0;
    2.42481, 0, 0;
    2.52623, 0, 0;
    2.62764, 0, 0;
    2.72905, 0, 0;
    2.83047, 0, 0;
    2.93188, 0, 0;
    3.06502, 0, 0;
    3.19817, 0, 0;
    3.33131, 0, 0
] m
HW_FlocStart = 2.49191 m
L_FlocBaffles = [
    2.31857, 2.27086, 2.1654;
    2.41857, 2.37086, 2.2654;
    2.31857, 2.27086, 2.1654;
    2.41857, 2.37086, 2.2654;
    2.31857, 2.27086, 2.1654;
    2.41857, 2.37086, 2.2654;
    2.31857, 2.27086, 2.1654;
    2.41857, 2.37086, 2.2654;
    2.31857, 2.27086, 2.1654;
    2.41857, 2.37086, 2.2654;
    2.31857, 2.1654, 2.1654;
    2.41857, 2.2654, 2.2654;
    2.31857, 2.1654, 2.1654;
    2.40259, 2.2654, 0;
    2.30259, 2.1654, 0;
    2.40259, 2.2654, 0;
    2.30259, 2.1654, 0;
    2.40259, 2.2654, 0;
    2.30259, 0, 0;
    2.40259, 0, 0;
    2.30259, 0, 0;
    2.40259, 0, 0;
    2.30259, 0, 0;
    2.40259, 0, 0;
    2.30259, 0, 0;
    2.37086, 0, 0;
    2.27086, 0, 0;
    2.37086, 0, 0
] m
W_FlocPort = 0.234601 m
H_FlocPort = 0.53975 m
N_FlocBaffles = 59
Z_FlocBaffles = [
    0, 0, 0;
    0.0814312, 0.129144, 0.234601;
    0, 0, 0;
    0.0814312, 0.129144, 0.234601;
    0, 0, 0;
    0.0814312, 0.129144, 0.234601;
    0, 0, 0;
    0.0814312, 0.129144, 0.234601;
    0, 0, 0;
    0.0814312, 0.129144, 0.234601;
    0, 0, 0;
    0.0814312, 0.234601, 0.234601;
    0, 0, 0;
    0.0974128, 0.234601, 0;
    0, 0, 0;
    0.0974128, 0.234601, 0;
    0, 0, 0;
    0.0974128, 0.234601, 0;
    0, 0, 0;
    0.0974128, 0, 0;
    0, 0, 0;
    0.0974128, 0, 0;
    0, 0, 0;
    0.0974128, 0, 0;
    0, 0, 0;
    0.129144, 0, 0;
    0, 0, 0;
    0.129144, 0, 0
] m
Gt_FlocMinFlow = 7827.4
N_FlocChannels = 3
# Entrance Tank:
# [reference: EntranceTank.xmcd]
ND_Lfom = 6 in
HL_Rm = 0.911511 cm
N_Lfom = 1
D_LfomOrifices = 19.05 mm
Q_LfomErrorMax = 1.3255 %
N_LfomOrifices = [5; 4; 2; 2; 2; 2; 1; 2; 1; 1]
L_Et = 1.5 m
W_Et = 0.75 m
HW_EtMin = 0.2 m
HW_EtMax = 0.4 m
H_Et = 2.89191 m
ZW_Et = 2.79191 m
# Any additional needed elevations should be calculated in the files above.
# Elevations:
ZW_ExitChannel = 2.36 m  # Water Level at the end of the plant in the exit channel and exit channel box
HW_Sed = 2.4 m
HW_FlocStart = 2.49191 m  # Water level at the beginning of the floc tank
HL_Floc = 9.191 cm  # just for ref. the head loss throught the floc tank
ZW_Et = 2.79191 m  # the height of the water in the entrance tank.
# AutoCAD References
# [reference: basics.xmcd]
# [reference: pipe.xmcd]
# [reference: tank.xmcd]
# [reference: lamina.xmcd]
# [reference: laminaplain.xmcd]
# [reference: cross.xmcd]
# [reference: Tee.xmcd]
# [reference: elbow.xmcd]
# [reference: Sludge.xmcd]
# [reference: Channel.xmcd]
# [reference: Manifold.xmcd]
# [reference: SedTankslopes.xmcd]
# [reference: Sed Tank Inlet Slope.xmcd]
# [reference: chemicalstock.xmcd]
# [reference: Sedimentation Tank.xmcd]
# [component: inputs SedTank]
# [reference: Flocculation Tank.xmcd]
# [component: inputs FlocTank]
# [reference: Entrance Tank.xmcd]
# [component: inputs EntranceTank]
