# This program produces the critical parameters for a single sed tank. All sed tanks are built identically.
# Each tank should have the same flowrate. The total space below the tank is 1 m (design assumption). Part of this space will have sloped walls (to help with draining) and part might have
# straight walls. The length of the sloped walls is determined by the tank width and the
# slope of the walls (they should be between 45 and 60 deg). The space between the top
# of the plate settlers and the water surface is equal to .25*spacing between adjacent launders.
# Since each tank has 1 launderer, the space between adjacent ones is equal to the tank width.
# This should ensure equal flow of effluent through these pipes. The depth of the middle section of
# the tank is determined by the length and slope of the plate settlers. The total depth of the tank is
# equal to the sum of these three depths, plus a freeboard depth. Freeboard space is empty space between the top of the tank and the water surface
Q_Sed := Q_Plant/N_SedTanks
w_Plate := 30 cm
V_Up := 70*m/day
ED_Slope =  # error: This variable is undefined.
w_Sed := 42.5 in
Π_SedCell =  # error
Q := V_Up*w_Sed/2*w_Plate
Π_cell := 2
K := 1  # for kinetic energy lost when a jet enters a reservoir (this neglects effect of the vena contracta)
# I assume square ports here
W_Trapezoid := 20 in
ν := 1 mm^2/s
G := 20/s  # at the end of the floc tank
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ε := G^2*ν = 0.4 mW/kg
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b_Venacontracta := (K*Q^3/(2*Π_cell*ε))^(1/7) = 5.44068 cm
# But this solution doesn't take into account the vena contracta through the port. Assume the vena contracta area is 0.6 and increase the
b := b_Venacontracta/sqrt(0.6) = 7.02389 cm
0.6*b^2 == b_Venacontracta^2
# Thus the ports should be 7 cm by 7 cm. The ports should also be staggered so that they alternate from side to side to minimize the dead zones in the bottom of the tank.
# We need to design the size of the sludge drain orifices. The orifices should be in all of the dead zones between the ports. The total area of the orifices should be approximately 1/4 of the area of the rectangular sludge manifold (which I have suggested is 5 cm deep and 10 cm wide).
B_SedPort := b
B_SedPortOpenings := 30 cm
W_Trapezoid := W_SedSingle/2 - B_SedPort - T_SedInletSlope
V_SedPort := Q/B_SedPort^2 = 2.65915 cm/s
V_Trapezoid := V_SedPort/3 = 0.886382 cm/s
A_Trapezoid := 1/2*W_Trapezoid^2*(tan(AN_SedTopInlet) - tan(AN_SedBottom))
L_SedMax := V_Trapezoid*A_Trapezoid/(V_SedUpBod*W_SedSingle/2)
Q_SedInlet := V_Trapezoid*A_Trapezoid
L_SedTotal := Q_Plant/(V_SedUpBod*W_SedSingle/2)
N_TrianglesperTank := 2
L_Sed := L_SedTotal/(N_SedTanks*N_TrianglesperTank)
N_Slopes := L_SedTotal/L_Sed
N_SlopePairs := N_TrianglesperTank/2
L_SedPort := B_SedPort/sin(AN_SedTopInlet)
W_SedPort := L_SedPort
N_SedPorts := ceil(L_Sed/B_SedPortOpenings)
W_Sed := W_SedSingle*N_SlopePairs
ND_SedPipeEntrance :=
    ND_SedPipeEntrance ← ND_SedInlet(K_El90, Q_Plant/(N_SedInletPipes*N_SedTanks), Nu_Water, G_FlocBod[last(G_FlocBod)], EN_PipeSpec) if sedlayout == 1
    ND_SedPipeEntrance ← ND_SedInlet(K_PipeExit, Q_Plant/(N_SedTanks*N_SedInletPipes), Nu_Water, G_FlocMin, EN_PipeSpec) if sedlayout == 3 or 2
    return ND_SedPipeEntrance
