HW_Sed := 1.55 m
# [reference: UserInputs- 4 Communities.xmcd]
# [reference: DesignAssumptions- 4 Communities.xmcd]
# [reference: MathFunctions.xmcd]
# [reference: PipeDatabase.xmcd]
# [reference: MinorLossCoefficients.xmcd]
# [reference: FluidsFunctions.xmcd]
# [reference: Sed. Inlet Slopes.xmcd]
# Sludge Drain Program
B_SedSludgeOrifices = 15 cm
N_SedSludge := N_SlopePairs = 1
N_SedSludgeOrifices := floor(L_Sed/B_SedSludgeOrifices) = 23
ND_SedSludge := ND_Manifold(Q_Sed/N_SlopePairs, HL_SludgeManifold, L_Sed, Pi_QSludgeOrifices, EN_PipeSpec, Nu_Water, E_Pvc, 0, N_SedSludgeOrifices) = 3 in
TotalArea_SludgeOrifices := 0.75*A_circle(ND_SedSludge) = 5.30144 in^2
A_SedSludgeOrifice := TotalArea_SludgeOrifices/N_SedSludgeOrifices
D_SedSludgeOrifice := RoundNearest(D_circle(A_SedSludgeOrifice), D_Drill) = 0.5625 in
Q_SludgeDrainInitial := Q_orifice(D_SedSludgeOrifice, HW_Sed, Pi_VenaContractaOrifice) = 33.4145 L/min
Time_SludgeDrain := 2*L_Sed*W_Sed/N_SlopePairs*HW_Sed/(Q_SludgeDrainInitial*N_SedSludgeOrifices) = 15.1963 min
# Lsed here is equal to the length of the sludgepipe.
# Given the orifice spacing, the number of orifices is determined by dividing the length of the sed tank by the orifice spacing
# The flow rate for draining is calculated given the assumed time for drainage, and the sed tank's dimensions
# It isn't clear what the design constraint is for sizing this pipe.
