# 1. How many sequential collisions are required to build a floc that is 3 mm in diameter from micro flocs that start out at 1 μm? You may assume that floc density remains constant.
d_initialfloc := 1 μm
d_maxfloc := 3 mm
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n_collisions(d_finalfloc, d_initialfloc) := log((d_finalfloc/d_initialfloc)^3)/log(2)
collisions := 0 .. ceil(n_collisions(d_maxfloc, d_initialfloc))
Maxcollisions := ceil(n_collisions(d_maxfloc, d_initialfloc)) = 35
# 2. Use the equation by Raymond D. Letterman and Dharmarajan R. Iyer
#
# to estimate the floc volume fraction with an alum dose of 15 mg/L. Use the MSDS for alum to find the necessary alum properties. You may ignore the contribution due to clay or other primary particles.
C_clay := 0*mg/L
ρ_clay := 2650*kg/m^3
ν := 1*10^-6*m^2/s
Al := 27*gm/mol
S := 32.064*gm/mol
O := 16*gm/mol
H := 1.008*gm/mol
MW_alum := 2*Al + 3*(S + 4*O) + 14.3*(2*H + O)
MW_alum = 599.821 gm/mol
C_alum := 15*mg/L
MW_alum := 666.44*gm/mol
Mole_Al(C_alum) := C_alum/MW_alum*2
Mole_Al(C_alum) = 4.50153e-5 mol/L
ϕ_floc(C_alum) := C_clay/ρ_clay + 120*L/mole*Mole_Al(C_alum)
ϕ_floc(C_alum) = 0.00540184
# 3. Estimate the separation distance between 3 mm diameter flocs.
L_separation(d_maxfloc, C_alum) := d_maxfloc*(π/(6*ϕ_floc(C_alum)))^(1/3)
L_separation(d_maxfloc, C_alum) = 13.7808 mm
# 4. What is the Kolmogorov length scale?
ε_cell := 0.25*mW/kg
η_Kolmogorov(ε_cell) := (ν^3/ε_cell)^(1/4)
η_Kolmogorov(ε_cell) = 0.251487 mm
v_r(ε_cell, L_seperation) :=
    v_r ← sqrt(ε_cell/ν)*L_seperation if L_seperation < 1*η_Kolmogorov(ε_cell)
    v_r ← (ε_cell*L_seperation)^(1/3) otherwise
    return v_r
# 5. Estimate the relative velocities of two flocs that are 1 cm apart.
L_apart := 1 cm
v_r(ε_cell, L_apart) := (ε_cell*L_apart)^(1/3)
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v_r(ε_cell, L_apart) = 0.0135721 m/s
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# 6. Estimate how long it takes for a 3 mm diameter floc to collide with another 3 mm diameter floc.
d_floc := 3 mm
α_collision := 1
t_c(d_maxfloc, C_alum, ε_cell, L_apart) := π*d_maxfloc/(6*ϕ_floc(C_alum)*v_r(ε_cell, L_apart))
t_c(d_maxfloc, C_alum, ε_cell, L_apart) = 21.4255 s
# 7. Calculate the value of the floc group . You may assume that  has a value of 1.
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i := 0 .. Maxcollisions - 1
Π_floc(α_collision, C_alum) := 1/α_collision*(π/(6*ϕ_floc(C_alum)))^(8/9)*sum(2^(-2/9*i), i)
Π_floc(α_collision, C_alum) = 406.595
# 8. Estimate how long it takes for a 1 μm particle to grow to a 3 mm diameter floc. You may assume the energy dissipation rate is constant.
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t_c(d_floc, ε_cell, C_alum, α_collision) := 1/α_collision*(d_floc^2/ε_cell)^(1/3)*(π/(6*ϕ_floc(C_alum)))^(8/9)*sum(2^(-2/9*i), i)
t_c(d_floc, ε_cell, C_alum, α_collision) = 134.255 s
# 9. Which change has a more profound affect on the integrated collision time, increasing the size of the initial particle by a factor of 10 or reducing the size of the final floc by a factor of 10? (Note that you have to recalculate the floc group!)
# Smaller final floc results in much shorter reaction time.
# 1. What is the optimal flocculator channel width based on the assumption that the optimal baffle spacing occurs when there is no vertical overlap of the baffles?
K_180 := 4
Π_cell := 2
d_maxfloc := 3 mm
Q_plant := 6000*L/min
ε := 25*mW/kg
h := 2.5 m
τ_floc := 0.5 Pa
Maxcollisions := ceil(n_collisions(d_maxfloc, d_initialfloc)) = 35
b_optimal(d_initialfloc, τ_floc, Maxcollisions) := h/2
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w := 1/b_optimal(d_initialfloc, τ_floc, Maxcollisions)^(4/3)*(K_180*Q_plant^3/(2*Π_cell*ε))^(1/3)
w = 0.253984 m
# 2.How many baffles are required?
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n_baffles := ceil((2*w/(Π_cell*K_180*Q_plant))^(1/2)*Π_floc(α_collision, C_alum)*d_maxfloc^(2/3)*ε^(1/6))
n_baffles = 4
# 3.What is the length of the flocculator?
L := n_baffles*b_optimal(d_initialfloc, τ_floc, Maxcollisions) = 5 m
# 4.What is the flocculator residence time?
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θ_floc := h*Π_floc(α_collision, C_alum)*(w/(Π_cell*Q_plant))^(3/4)*(2/K_180)^(1/4)*(d_maxfloc^(2/3)/ε^(1/12))
θ_floc = 0.482071 min
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θ_floc = 0.482071 min
θ_floc := b_optimal(d_initialfloc, τ_floc, Maxcollisions)*w*h*n_baffles/Q_plant
# 5.What is the total head loss for the flocculator? Calculate the head loss two ways.
#
# a. Use the energy dissipation rate and the required reaction time to calculate the energy loss and convert that into an elevation drop.
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θ_cell := Π_cell*w*b_optimal(d_initialfloc, τ_floc, Maxcollisions)^2/Q_plant
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h_l := ε*θ_cell/g
h_l = 20.2337 mm
# b.Calculate the head loss per baffle using the minor loss coefficient and then calculate the total head loss for the flocculator.
V := Q_plant/(b_optimal(d_initialfloc, τ_floc, Maxcollisions)*w)
K_180 = 4
hl_baffle := K_180*V^2/(2*g)
V = 0.31498 m/s
hl_baffle = 20.2337 mm
