# Automated Design: AutoCAD: Plant Drawing Inputs
# References
# [reference: PipeDatabase.xmcd]
# Colors
grey := [132; 132; 132]
ltgrey := [214; 214; 214]
dkgrey := [91; 91; 91]
blue := [0; 255; 255]
blue2 := [0; 191; 255]
blue3 := [0; 127; 255]
green := [0; 255; 0]
purple := [127; 0; 255]
ltpurple := [125; 0; 160]
zc := .1 m
zc_point := [0; .1; 0]*m
# Sedimentation Tank
tank_thick := 1 ft
channel_thick := .5 ft
tank_origin := [0; 0; 0]*m
tank_dim := [9 m; 1.25 m; 2 m]
channel_dim := [tank_dim[1] + (2*tank_thick); 2 ft; 2 ft]
waterlevel := .5 ft
manifold_depth := .5 ft
num_tanks := 3
sedpipe_inr := 3 in
sedtankpipe9_length := .5 ft
offfloor_length := 1 ft
manifoldorifice_rad := .25 in
manifoldorifice_dist := .1 m
manifold_inr := 3 in
wasteorifice_rad := .25 in
wasteorifice_dist := 1 m
waste_inr := 2 in
offfloorlamina_dist := 1 m
lamina_amp := .5 in
lamina_thick := 4 mm
lamina_width := tank_dim[1]
lamina_length := .5 m
lamina_periods := 8.5
lamina_slope := 60 deg
lamina_num := 150
lamina_col := 1  # this is a constant!
lamina_x := .05 m
lamina_y := 7 cm
z_rotation := 0
rotate_angle := 90
ϕ := 45 deg  # sedtank slope angle
# Flocculation Tank
numfloc_tanks := 2
floc_inleth := 0.5 ft
flochole_dim := [.26 m; tank_thick; 1.262 m]
floc_dim := [tank_dim[0]; tank_dim[1]/numfloc_tanks; tank_dim[2]]
floc_dim = [9; 0.625; 2] m
baffletank2_location := [
    4.467, .156, 0.609;
    4.192, 0, 1.547;
    3.917, .156, 0.609;
    3.303, 0, 1.037;
    2.688, .156, 1.118;
    2.073, 0, 1.037;
    1.458, .156, 1.118;
    0.844, 0, 1.037
]*m
baffletank1_location := [
    0.174, .156, 0.457;
    0.348, 0, 1.699;
    0.522, .156, 0.457;
    0.695, 0, 1.699;
    0.869, .156, 0.457;
    1.043, 0, 1.699;
    1.217, .156, 0.457;
    1.391, 0, 1.699;
    1.565, .156, 0.457;
    1.739, 0, 1.699;
    1.913, .156, 0.457;
    2.086, 0, 1.699;
    2.26, .156, 0.457;
    2.434, 0, 1.699;
    2.608, .156, 0.457;
    2.782, 0, 1.699;
    2.956, .156, 0.457;
    3.13, 0, 1.699;
    3.404, .156, 0.609;
    3.679, 0, 1.547;
    3.954, .156, 0.609;
    4.229, 0, 1.547
]*m
baffletank2_num := rows(baffletank2_location)
baffletank1_num := rows(baffletank1_location)
baffle_amp := .5 in
baffle_thick := 4 mm
baffle_slope := 90 deg
baffle_width := floc_dim[1]
baffle_col := 1  # this is a constant!
baffle_periods := 8.5
baffle_y := 7 cm
baffle_num := 1
baffle_x := 4 in
# Platform
column_dim := [.61 m; .61 m; tank_dim[2] + tank_thick - channel_dim[2] - channel_thick]
platform_thick := 1 ft
walkway_width := 1.5 m
# Grit Tank
grit_thick := 6 in
grit_origin := [
    tank_origin[0] - tank_dim[0] - tank_thick;
    tank_origin[1] + (num_tanks*tank_dim[1]) + (num_tanks*tank_thick) + numfloc_tanks*floc_dim[1] + (numfloc_tanks - 1)*tank_thick - floc_dim[1]/2;
    tank_origin[2] + floc_inleth
]
Δx_grit := walkway_width
grit_thick := 6 in
grit_dim := [3 ft; 3.5 ft; 2.5 ft]
grit_holes := 7
gritriser_h := 30/12*ft
grit_rad := .25 in
Δy_grit := tank_thick + floc_dim[1]/2 + walkway_width - grit_dim[1] - 2*grit_thick
gritpipe_inr := 2 in
gritdisp1 := 8 in
Δz_grit := tank_dim[2] - channel_dim[2] - platform_thick - floc_inleth
gritdisp2 := 6 in
# Plant Level Tank
lvlpipe_inr := manifold_inr
effluent_inr := 4 in
lvltank_thick := .5 ft
sedeff_origin := [
    tank_origin[0] - tank_dim[0] - tank_thick;
    tank_origin[1] + 2.5*tank_dim[1] + 2*tank_thick;
    tank_origin[2] + tank_dim[2] - channel_dim[2] - platform_thick - ElbowRadius(2*sedpipe_inr)
]
lvltank_dim := [3 ft; 3 ft; 2 ft]
lvltank_waterlvl := 1.5 ft
wall_disp := 3/12*ft + outerradius(2*effluent_inr)
Δz_effluent := ElbowRadius(2*sedpipe_inr) + 2*platform_thick - channel_dim[2]
Δysub_effluent := ElbowRadius(2*effluent_inr)
Δy_effluent :=
    Δysub_effluent if tank_dim[1]/2 + tank_thick + numfloc_tanks*(floc_dim[1] + tank_thick) - grit_dim[1] - lvltank_dim[1] - 2*lvltank_thick - 2*grit_thick < ElbowRadius(2*effluent_inr)
    tank_dim[1]/2 + tank_thick + numfloc_tanks*(floc_dim[1] + tank_thick) - grit_dim[1] - lvltank_dim[1] - 2*lvltank_thick - 2*grit_thick otherwise
# Chemical Stock Platform
r_drum := 16 in
drum_disp := 4 in
stockplat_thick := 6 in
stockplatcol_dim := [6 in; 6 in; 3 ft]
h_drum := 3 ft
walk_space := 18 in
stockplat_dim := [4*r_drum + 3*drum_disp; 2*r_drum + 2*drum_disp; stockplat_thick]
stockplat1_origin := [
    tank_origin[0] - tank_dim[0] - tank_thick - walkway_width - grit_dim[0] - 2*grit_thick - ShortTeeLength(2*gritpipe_inr) - walk_space;
    tank_origin[1] + (num_tanks*tank_dim[1]) + ((num_tanks + 2)*tank_thick) + 2*floc_dim[1] + walkway_width;
    tank_origin[2] + tank_dim[2] - channel_dim[2] + stockplatcol_dim[2]
]
stockplat2_origin := [
    sedeff_origin[0] - walkway_width - lvltank_dim[0] - 2*lvltank_thick;
    sedeff_origin[1] + Δy_effluent + lvltank_dim[1] + 2*lvltank_thick;
    tank_origin[2] + tank_dim[2] - channel_dim[2] + stockplatcol_dim[2]
]
