laminaplainscript1(origin, dim, angle, win1, win2, n_baffles, n_bafflecols, xspace) :=
    viewtoplam ← viewtop
    zoom ← zoom_wina(win1, win2)
    box ← boxA(origin, origin + dim)
    rotate ← rotate_3d1(origin, origin, "y", angle)
    array ← arrayB(origin, n_bafflecols, n_baffles, xspace)
    sum ← concat(viewtoplam, zoom, box, array) if angle == 0
    sum ← concat(viewtoplam, zoom, box, rotate, array) otherwise  # error: This variable is undefined.
laminaplain1(origin, w, l, t, angle, n_baffles, n_bafflecols, xspace) := laminaplainscript1(origin, [t; w; l], 90 - angle/deg, [origin[0] - zc; origin[1] - zc; origin[2] - zc], [origin[0] + t + zc; origin[1] + w + zc; origin[2] + l + zc], n_baffles, n_bafflecols, xspace)  # error: This variable is undefined.
xspace := 1 ft
width := 1 m
periods := 2
origin := [0; 0; 0]*m
anglel := 60 deg
yspace := 3 ft
lengthl := 2 m
thick := 1 cm
num_baffles := 6
amplitude := 5 cm
num_bafflecols := 1
draw := laminaplain1(origin, width, lengthl, thick, anglel, num_baffles, num_bafflecols, xspace)  # error: This variable is undefined.
# [component: inputs draw]
