# AguaClara Water Treatment Plants
# Automated Design
# Add variable descriptions next to every varible so it is easy to interpret what this all means.
AguaClaraDesignToolVersion := 10  # This is used by LabVIEW to confirm that a valid design tool program is open
# AutoCAD References
# [reference: AutoCADMasterProgram.xmcd]
# User Inputs:
HW_Sed := 2 m
# Design References
# [reference: BasicInputs.xmcd]
# Use BasicClientInputs and ExpertClientInputs when this is run by LabVIEW.
# Use BasicInputs and ExpertInputs to use the program in MathCAD
# Change the reference by
# - right clicking
# - select properties
# - reference tab
# - type in the correct file name
# [reference: ExpertInputs.xmcd]
# [reference: DesignAssumptions.xmcd]
# [reference: MathFunctions.xmcd]
# [reference: PipeDatabase.xmcd]
# [reference: MinorLossCoefficients.xmcd]
# [reference: FluidsFunctions.xmcd]
# Sed Tanks and Slopes:
# [reference: Influent Sed Manifold.xmcd]
N_SedTanks = 3
B_SedPort = 5.85864 cm  # Height of the narrowest part of the manifold ports
W_SedPort = 5.85864 cm
H_SedBetween = 7.62 cm  # Distance from the top of the inlet manifold to the bottom of the ledge supporting the lamella frame
N_SedPorts = 45  # per bay
L_Sed = 6.47919 m
N_SedBays = 1  # Number of bays of inlet manifolds in each sed tank
A_SedPort = 34.3237 cm^2  # Port Area
L_SedPort = 6.76498 cm  # Length of the port through which water exits the inlet manifold
W_SedSludgeFlat = 5 cm  # Distance between tips of manifold plates (space alloted for the drain holes
W_SedSlopePlate = 30 cm  # Width of ferrous cement plates in whice one manifold port is cut
AN_SedTopInlet = 60 deg  # Angle of the top of the inlet manifold
Q_SedBay = 5.66667 L/s
AN_SedBottom = 10 deg  # Angle of the bottom of inlet manifold
# Sedimentation Tank Sludge Drain:
# [reference: SludgeDrain.xmcd]
N_SedSludgeOrifices = 43  # per cell
W_SedSludge = 17.0614 cm  # Width of the sludge channel
Ti_SludgeDrain = 10 min  # Tank Drain time
H_SedSludge = 5 cm  # Depth of the sludge channel
B_SedSludgeOrifices = 15 cm  # Distance center to center between drain orifices
T_SedSludge = 9.33013 cm
# Thickness of the plate topping the sludge channel
# through which drain holes are formed
D_SedSludgeOrifice = 0.625 in  # Diameter of drain orifices
# Sedimentation Tank Dimensions:
# [reference: Sedimentation Dimensions.xmcd]
Z_SedSludge = 14.3301 cm  # Height from 0 of the top of the sludge drain
H_SedBottomSlope = 0.0831291 m  # Height of the bottom slope
H_SedTopSlope = 0.773272 m  # Height of the top of the inlet manifold
Z_SedSlopes = 1.01657 m  # Height from 0 of the top of the inlet manifold
H_Sed = 2.1 m  # Total tank wall height
W_Sed = 1.0795 m  # Total tank width
N_SedPorts = 45
L_Sed = 6.47919 m  # Total tank length
# Inlet Channel:
# [reference: Inlet Channel.xmcd]
W_InletChannel = 0.282454 m
L_Channel = 3.6885 m
W_SedManifoldEntrance = 0.11384 m  # Width of the drop chimneys connecting channel to sed inlet manifolds
L_SedManifoldEntrance = 0.471449 m  # length of drop chimmneys
N_SedInletPipes = 2  # per sed bay
H_InletChannel = 0.857227 m
# Sedimentation Tank Effluent Launder:
# [reference: Launder.xmcd]
N_SedLaunderOrifices = 114  # Number of orifices per launder
# How many launders per cell?
# What is the spacing of the orfices?
# How many rows of orifices per launder?
Q_SedLaunderOrifices = 1.49123 L/min
B_SedLaunderOrifices = 0.1 m  # Center to center launder spacing
# Exit Channel:
# [reference: Exit Channel.xmcd]
W_ExitChannel = 0.282454 m
ND_SedLaunder = 6 in
H_ExitChannel = 0.857227 m
L_SedLaunder = 5.76428 m
L_ExitChannel = 3.6885 m
H_PltWeir = 0.656984 m  # height of the weir carrying water to the distribution tank
D_SedLaunderOrifice = 0.3125 in
HW_ExitChannel = 0.717227 m
Z_SedLaunder = 1.87586 m  # height from 0 of the launder
ZW_ExitChannel = 1.96 m  # water height in exit channel from 0
# Lamella:
# [reference: Lamella.xmcd]
L_SedPlate = 0.737423 m
B_SedPlate = 4.13686 cm  # center to center distance between lamella
S_SedPlate = 3.83686 cm  # spacing between lamella
N_SedPlates = 111  # Number of Sed Plates per Sedimentation Tank Bay.
AN_SedPlate = 60 deg
V_SedC = 10.0085 m/day
V_SedUp = 70 m/day
H_SedPlate = 0.638627 m
H_SedAbove = 0.208275 m  # Height of water needed above the lamella
# Sedimentation Tank Floc Hopper:
# [reference: Floc Hopper.xmcd]
A_FlocHopper = 1.76256 m^2
L_FlocHopper = 1.63276 m  # Length of the hopper cement plate
L_FlocHopperOffset = 0.368711 m  # distance from the edge of the channel to the bottom of the first lamella (collection distance)
W_FlocHopper = 1.0795 m  # width of the hopper set within each bay
# Flow Controller:
# [reference: FCM.xmcd]
N_Fcm = 2
ID_FcmTube = 4.318 mm
ID_FcmTube = 0.17 in
L_FcmTube = 252.51 cm
Q_FcmTubeMax = 382.5 mL/min
HL_FcmValve = 27.182 cm
# Flocculator: | Look at Flocculator Positioning arrays
# [reference: Flocculation Energy Dissapation.xmcd]
W_FlocChannel = 0.45 m
L_Sed = 6.47919 m  # Fill last channel with bafffles from last channel
# Fix port width to be based on energy dissipation in that channel
# Adjust spacing after the number of baffles per channel is known.
ED_Floc = [6.4; 1.6; 0.4] mW/kg
# Check the residence time of the flocculator should be at least 20minutes
S_FlocBaffle = [21.565; 34.2323; 54.3405] cm
B_FlocBaffle = [21.765; 34.4323; 54.5405] cm
HW_FlocEnd = 2 m
L_FlocBaffles = [
    1.78435, 1.65768, 1.65768, 1.4566;
    2.08864, 1.96197, 1.96197, 1.76089;
    1.78435, 1.65768, 1.65768, 1.4566;
    2.08864, 1.96197, 1.96197, 1.76089;
    1.78435, 1.65768, 1.4566, 1.4566;
    2.08864, 1.96197, 1.76089, 1.76089;
    1.78435, 1.65768, 1.4566, 1.4566;
    2.08864, 1.96197, 1.76089, 1.76089;
    1.78435, 1.65768, 1.4566, 1.4566;
    2.08864, 1.96197, 1.76089, 1.76089;
    1.78435, 1.65768, 1.4566, 1.4566;
    2.08864, 1.96197, 0, 0;
    1.78435, 1.65768, 0, 0;
    2.08864, 1.96197, 0, 0;
    1.78435, 1.65768, 0, 0;
    2.08864, 1.96197, 0, 0;
    1.78435, 0, 0, 0;
    2.08864, 0, 0, 0;
    1.78435, 0, 0, 0;
    2.08864, 0, 0, 0;
    1.78435, 0, 0, 0;
    1.96197, 0, 0, 0;
    1.65768, 0, 0, 0
] m
X_FlocBaffles = [
    0.545405, 5.92079, 0.558405, 5.92079;
    0.763055, 5.57646, 0.902728, 5.37538;
    0.980705, 5.23214, 1.24705, 4.82998;
    1.19836, 4.88782, 1.59137, 4.28457;
    1.41601, 4.54349, 2.13678, 3.73917;
    1.63366, 4.19917, 2.68218, 3.19376;
    1.85131, 3.85484, 3.22759, 2.64836;
    2.06896, 3.51052, 3.77299, 2.10295;
    2.28661, 3.1662, 4.3184, 1.55755;
    2.50426, 2.82187, 4.8638, 1.01214;
    2.72191, 2.47755, 5.40921, 0.466739;
    2.93956, 2.13323, 0, 0;
    3.15721, 1.7889, 0, 0;
    3.37486, 1.44458, 0, 0;
    3.59251, 1.10026, 0, 0;
    3.81016, 0.755934, 0, 0;
    4.02781, 0, 0, 0;
    4.24546, 0, 0, 0;
    4.46311, 0, 0, 0;
    4.68076, 0, 0, 0;
    4.89841, 0, 0, 0;
    5.24273, 0, 0, 0;
    5.58706, 0, 0, 0
] m
N_FlocChannels = 4
L_FlocTank = 25.9168 m
N_FlocBaffleSection = [21; 21; 21]
N_FlocBaffles = 57
3*21 = 63
HL_Floc = 20.429 cm
HW_FlocStart = 2.20429 m
Z_FlocBaffles = [
    0, 0, 0, 0;
    0.21565, 0.342323, 0.342323, 0.543405;
    0, 0, 0, 0;
    0.21565, 0.342323, 0.342323, 0.543405;
    0, 0, 0, 0;
    0.21565, 0.342323, 0.543405, 0.543405;
    0, 0, 0, 0;
    0.21565, 0.342323, 0.543405, 0.543405;
    0, 0, 0, 0;
    0.21565, 0.342323, 0.543405, 0.543405;
    0, 0, 0, 0;
    0.21565, 0.342323, 0, 0;
    0, 0, 0, 0;
    0.21565, 0.342323, 0, 0;
    0, 0, 0, 0;
    0.21565, 0.342323, 0, 0;
    0, 0, 0, 0;
    0.21565, 0, 0, 0;
    0, 0, 0, 0;
    0.21565, 0, 0, 0;
    0, 0, 0, 0;
    0.342323, 0, 0, 0;
    0, 0, 0, 0
] m
W_FlocPort = 0.543405 m
H_FlocPort = 0.458767 m
Ti_Floc = 22.8677 min  # residence time of the flocculator
# Entrance Tank:
# [reference: EntranceTankDim.xmcd]
L_Et = 6.47919 m  # length of the entrance tank
W_Et = 0.45 m  # width of the entrance tank
HW_EtMin = 0.2 m
HW_EtMax = 0.4 m
H_Et = 2.60429 m  # height of the entrance tank
ZW_Et = 2.50429 m
# Any additional needed elevations should be calculated in the files above.
# Elevations:
ZW_ExitChannel = 1.96 m  # Water Level at the end of the plant in the exit channel and exit channel box
HW_Sed = 2 m
HW_FlocStart = 2.20429 m  # Water level at the beginning of the floc tank
HL_Floc = 20.429 cm  # just for ref. the head loss throught the floc tank
ZW_Et = 2.50429 m  # the height of the water in the entrance tank.
# Rapid Mix:
# [reference: RapidMixer.xmcd]
ED_Diffusion =  # error: This variable is undefined.  # Minimum Energy Dissipation needed
HL_FlocEntryOrifice =  # error  # Head loss caused by entering flocculation tank.
A_FlocEntry =  # error  # Area required of entry port to flocculator
L_FlocEntryOrifice =  # error
W_FlocEntryOrifice =  # error
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HW_EtMax = 0.4 m
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A_EtOrifice =  # error
L_trueET[30] =  # error  # Assumption for now
W_EtOrifice[30] =  # error
HW_EtMin[30] =  # error: This value must be a vector.
Pi_EtFlow[30] =  # error
HW_EtChannel[30] =  # error
HW_Channel2 =  # error
HW_Total =  # error
L_Et = 6.47919 m  # Length of sqaure entrance tank
Vol_Stock = 1377 L
An_SedBottom := 10
An_SedTopInlet := 60
stack(L_Et, W_Et, H_Et, N_FlocChannels, W_FlocChannel, N_FlocBaffles, W_InletChannel, H_InletChannel, L_Channel, N_SedInletPipes, An_SedTopInlet, An_SedBottom, Z_SedSlopes, N_SedInletSlopes, N_SedPorts, A_SedPort, W_SedSlopePlate, W_SedSludgeFlat, N_SedTanks, H_Sed, L_Sed, W_Sed, B_SedSludgeOrifices, D_SedSludgeOrifice, H_SedSludge, W_SedSludge, T_SedSludge, B_SedPlate, L_SedPlate, ND_SedLaunder, D_SedLaunderOrifice, W_ExitChannel, L_ExitChannel, H_ExitChannel) =  # error: The forms of these values must match. This value has the form: Unitless, but others have the form: Length.
# AutoCAD References
