# [reference: userinputs.xmcd]
# [reference: DesignAssumptions.xmcd]
# [reference: MathFunctions.xmcd]
# [reference: PipeDatabase.xmcd]
# [reference: MinorLossCoefficients.xmcd]
# [reference: FluidsFunctions.xmcd]
# Channel Design
# The water height in the plant leveling tank is determined by the water level in the
# channel and the freeboard.
W_ChannelG := (1/G_FlocBod[last(G_FlocBod)])^(1/2)*(Q_Plant/HW_Channel)^(3/4)*(K_El90/(2*Nu_Water*Pi_FlocDissipation))^(1/4)
# Use the G from the last section of the flocculator
# The width of the channel is a function of the Gcell average we want to maintain the losses from 90 degree turns and the energy dissapation zone (Π_cell)
L_Channel := N_SedTanks*(W_Sed + T_PlantWall)  # The length is based on the side of the sed tank
ND_SedPipeEntrance := ND_SedInlet(K_El90, Q_Plant/(N_SedInlets*N_SedTanks), Nu_Water, G_FlocBod[last(G_FlocBod)], EN_PipeSpec) = 0.1524 m
# Decides Channel width based on the necessity to be at least as great as the width determined with G, but also must be wide enough to fit sed inlet pipes.  This W.channel chooses the larger choice to fulfill both needs.
W_Channel := max(W_ChannelG, outerdiameter(ND_SedPipeEntrance))
