# INDEX
# Basis of Design Assumptions | Click on these titles to go to that section:
# Drum  Parameters
# Flocculation tank assumptions
# Used throughout program
# Sedimentation tank assumptions
NU := 1*10^-6*m^2/s  # The kinematic viscosity of water.
# Launder Design and Sludge Assumptions
Re_pipetransition := 2100  # Sedtank Drain assumptions
E_Pvc := 0.12 mm
# Plant Leveling Tank assumptions
# Grit Chamber assumptions
W_ApColumn := 20 cm
# Channel assumptions
L_ApColumn := 20 cm
H_ApColumn := 120 cm  # Chemical Feed Stock Assumptions:
W_CpColumn := 20 cm
# Plant Elevation Design Assumptions
L_CpColumn := 20 cm
# Minor Loss Coefficients
H_CpColumn := 120 cm
W_Column := 30 cm
L_Column := W_Column
H_PlantFreeboard := 10 cm
# Drum  Parameters
D_Drum := 15 cm
H_Drum := 0.7 m
S_Drum := 15 cm
W_CpWalkway := 30 cm  # This is the extra space in addition to the chemical drums needed for walking on the chemical platform.
W_ApWalkway := 30 cm
# Flocculation tank assumptions
# One flocculation tank has the same volume as the one sedimentation tanks. We arrive at this conclusion because:
# The Length of the flocculator is based on the same length of the sedimentation tank. In order to save money on materials, it was decided to make the width of the flocculation tank 1/2 the size of the sedimentation tanks. Therefore, in order to transition nicely into the channel that distributes flow into the three sedimentation tanks, the flocculator is modeled as a U shape. (Currently, we have assumed 2 channels in the flocculator and 3 sedimentation tanks.)
# The depth of the flocculation tank is similarly set by the depth of the sedimentation tank.
# (These are currently the parameters which set the dimensions for the flocculator. Until research proves otherwise, this is what guides the motivation for the flocculator design.)
N_FlocTankChannels := 2  # We are setting the number of channels in the flocculator to 2.
# This is the ideal value of G in each of the three baffle spacings. This is based off the Okum and Schulz model that called for G values of (75, 45, 15) 1/s. However, these values consider the theory that flocs only collide over a distance of 2b after making the 180 degree turn around a baffle.
G_Floc := [166; 83; 19]*1/s
# This is the minimum value for Gtheta that a flocculator must have to be effective. This value was found based on the flocculator at Ojojona. This value also considers the theory that flocs only collide over a distance of 2b after making the 180 degree turn around a baffle (not through the entire tank as as previously assumed).
Gt_FlocMin := 5000
K_FlocBaffle180 := 3  # This is the loss coefficient for a 180 degree turn.
H_FlocOverlapMin := 2 cm  # This is the minumum overlap between adjacent baffles to prevent short circuiting.
# This is the ratio of the baffle spacing to the distance between the bottom of a baffle and the bottom of the tank (or top of a baffle and water surface.
Pi_FlocBaffle := 1.5
# This is the ratio between the design flow rate (max flow rate) and the minimum flow rate. The flocculator must be able to handle both.
Pi_QPlant := 0.5
S_FlocPort := 1.5 cm
# This is extra space around the hole that the water flows through when making the u turn. This space is between the hole and the last baffle.
H_FlocInletPipe := 15 cm  # This is the height of the inlet pipe to the flocculator above the floor of the sed tank
Gt_FlocAbsmin := 4500  # This is the absolute minimum allowable Gθ value for the flocculator.
# Sedimentation tank assumptions
AN_SedPlate := 60 deg  # Degree lamella is installed relative to the horizontal (so flocs slide down lamella)
AN_SedBottom := 60 deg  # Angle of the slope of the bottom of the sed tank
V_SedUp := 100*m/day  # We assume critical velocity should be 10 m/day, but to allow for formation of sludge blanket we need an upflow velocity of 100m/day.
# Critical velocity must be low enough to allow for almost all
# of the particles to settle out
H_SedBelow := 1 m  # This is the amount of space under the plate settlers, it will be some combination of straight and slanted walls.
N_SedTank := 3
# Number of sedimentation tanks (to ensure currently reasonable dimensions, this might be a factor by which to enlarge the number of sedimentation tanks in the future.)
N_SedInlets := 4  # Number of inlet pipes into each sed tank
C_SedTank := 10 cm  # Space between top of tank and water surface
Pi_SedAboveW := 0.25
# this is the ratio between the depth of the water between the top of the plate settlers and the effluent launders and the spacing between effluent launders
# Launder Design and Sludge Assumptions
# Ratio of the flow between the launders, the long path flow divided by the short path flow
Pi_Launders := 0.95
Pi_LaunderOrifice := 0.85  # Ratio of the flow between the orifices within a launder (the farthest orifice divided by the closest orifice)
B_SedLaunderOrifices := 10 cm
L_PltAssumed := 0.8 m
# Length of Plant Leveling Tank assumed to calculate headloss through launders. Any difference from actual length is assumed to be negligible.
# Sedtank Drain assumptions
L_SludgePorts := 0.1 m  # The orifice spacing in the sedimentation tank drainage
Ti_SludgeDrain := 1800 sec  # The drainage time for the sedimentation tank
Pi_Sludge := 0.85  # Ratio of the flow between the sludge pipes, the long path flow divided by the short path flow
# Plant Leveling Tank assumptions
Cd_WeirPlt := 0.61  # Weir coefficient
# This costraint might not work for smaller plants
Pi_Plt := 1/3  # This is the ratio between the spacing above the weir and the diameter of the weir
HL_SedLaunderDesign := 0.1 m  # The maximum allowed head loss through the launders
C_Plt := 0.5 m  # Total space assumed for concrete between inlet pipes
# Assumes distances of the sedimentation tank exit pipes. This will not stay as an assumption, the AutoCADD team and hydraulic team need to collabrate to calculate this array
# Entrance Tank assumptions
# Elevation between orfice rows at which the flow is calibrated. A value of 1 corresponds to the elevation of the next row of orifices and a value of 0 corresponds to the elevation of the current row of orifices.
# Both of these assumptions were tested over a range of flow rates and found to give reasonable Lfom configurations.
Pi_HLfom := 2/3
N_LfomOrificesFirstrow := 5  # Number of orfices in the first row of the Lfom used to determine size of orifices.
L_RmPipe := 2 m  # The total pipe length between the orifices and the flocculator (rapid mix pipe) .
N_RmEl := 3
# Pipe connecting the Grit chamber to the floc tank has three elbows. Based on how the AutoCAD team draws this pipe. The minor loss coefficient for this is K.el90
N_RmTee := 1
# Pipe connecting the Grit chamber to the floc tank has one T. Based on how the AutoCAD team draws this pipe. The minor loss coefficient for this is either K.Tflowbr
HL_RmDesign := 20 cm
# This is the allowable head loss through the rapid mix pipe and is what is used to size the pipes from the grit chamber to the flocculator AND the flow measurement tubes in the grit chamber
HL_Lfom := 20 cm  # Head loss through the Lfom
B_LfomOrifice := 2 cm  # Veritical distance between orifices
Pi_LfomOrificeArea := 3
# Ratio of LFOM pipe area to orifice area. Note that for this calculation is based on the assumption of one orifice located HL.FlowMeter below the water surface.
D_DrillEng :=
    i ← 0
    D_DrillEng[0] ← 1/16*in
    while D_DrillEng[i] < 1 in
        i ← i + 1
        D_DrillEng[i] ← D_DrillEng[i - 1] + 1/16*in
    while D_DrillEng[i] < 2 in
        i ← i + 1
        D_DrillEng[i] ← D_DrillEng[i - 1] + 1/8*in
    return D_DrillEng
D_DrillMet :=
    i ← 0
    D_DrillMet[0] ← 1 mm
    while D_DrillMet[i] < 20 mm
        i ← i + 1
        D_DrillMet[i] ← D_DrillMet[i - 1] + 1 mm
    while D_DrillMet[i] < 50 mm
        i ← i + 1
        D_DrillMet[i] ← D_DrillMet[i - 1] + 2 mm
    return D_DrillMet
D_Drill :=
    D_Drill ← D_DrillEng if EN_DrillSeries == 1
    D_Drill ← D_DrillMet otherwise  # error: This variable is undefined.
# Channel assumptions
K_90 := 0.4  # The loss coefficient for the channel transition in a 90 degree turn
Pi_FlocDissipation := 2
# The length of the zone where the energy is dissipated. This is the length of the cell, L, divided by the width of the cell b. Also used in flocculation calculation
HW_Channel := 60 cm  # This is the height of the water level in the channel.
# Chemical Feed Stock Assumptions:
HL_FcmTube := 20 cm
HL_FcmValveFreefall := 5 cm
D_FcmValveOrifice := 0.093 in
Al_MaxDose := 60*mg/L
HL_FcmInletDesign := 20 cm
H_StockTankPort := 10 cm
L_FcmTubeMax := 3 m
ID_FcmTubeEnglish := [0.0625; 0.125; 0.17; 0.25; 0.3125; 0.375]*in
ID_FcmTubeMetric := [2; 3; 4; 5; 6; 7]*mm
# Plant Elevation Design Assumptions | The PLT assumptions all seem to be inappropriate.
# L.sedinlet is the average length of the sedimentation inlet pipes
L_sedinlet := 2.5 m
# n.sedinlet is the number of inlet
# pipes per sed tank
n_sedinlet := 4
# n.siturns is the number of turns in each inlet pipe
n_siturns := 2  # WHAT IS GOING ON HERE? - EXPLAIN ASSUMPTIONS PLEASE
n_sedexitturns := [5; 4; 4]  # Design Assumption: based on the layout of the plant
n_rmturns := 6  # Number of right angles in the pipe from the Rapid Mix to the flocculators.
n_launturns := 0
# is the number of turns in the launder pipe (this value
# should be zero)
L_sedexits := [3.56 m; 4.39 m; 6.0 m]
# Drill Bits available for drilling orifices
i := 0 .. 30
j := 0 .. 23
D_engdrill[i] := 1/16*(i + 2)*in
D_metdrill[j] := 2*(j + 2)*mm
# Determine which array of drillbit sizes to use based on type of drill set (english or metric)
D_drill :=
    D_engdrill if DrillSeries == 1
    D_metdrill otherwise  # error: This variable is undefined.
