References
References
# [reference: UserInputs.xmcd]
# [reference: MathFunctions.xmcd]
# [reference: PipeDatabase.xmcd]
# [reference: MinorLossCoefficients.xmcd]
# [reference: FluidsFunctions.xmcd]
# [reference: DesignAssumptions.xmcd]
# Solution steps
# calculate diameter of single Lfom pipe
# Calculate number of riser pipes based on some sort of flow max for a given riser pipe diameter. Currently we are using the notion that an orifice at 20 cm carrying all of the water into the riser pipe must be less than 1/3 the area of the riser pipe.
# Design the orifice pattern for each riser pipe (note that an alternate solution would be to design standard riser pipe designs and then simply pick one of those designs. Thus a 3" pipe might be a 100 L/min Linear Flow Orifice Meter.
# Meet the target flows as closely as possible when the water level is at the bottom of each row of orifices
N_Lfom := 1  # This could go into design assumptions
K_Rm := 1  # Accounts for the exit into the flocculator from the straight Lfom.
Inputs
Q_Plant := 1000*L/min
H_dmax := 20 cm
N_Lfom := 1
C_d := 0.62
Π_Sutro := 0.1
Π_Lfomorifice := 20
# Define the spacing between rows
B_LfomOrifices := H_dmax/Π_Lfomorifice
# Number of risers
A_LfomOrificeTotal := A_orifice(HL_Lfom, Pi_VenaContractaOrifice, Q_Plant)
ID_Lfom := sqrt(4*Pi_LfomOrificeArea*A_LfomOrificeTotal/π) = 8.89285 in
ND_Lfom := NominalDiameter(ID_Lfom, EN_PipeSpec) = 12 in
HL_Rm := h_l(Q_Plant, ID_Lfom, L_RmPipe, K_Rm, Nu_Water, E_Pvc) = 0.898175 cm
## Design Lfom
# Linear Flow Orifice Meter
# Equation that defines the width of the rectangular base of the weir
W_sutro(Q_max, H_dmax) := Q_max/(H_dmax^(3/2)*C_d*sqrt(2*g*Π_Sutro))
s_s := Π_Sutro*H_dmax = 2 cm
# Equation that defines the width of the weir as a funtion of height
y(x, Q_max, H_dmax) :=
    W_sutro(Q_max, H_dmax)/2*(1 - 2/π*atan(sqrt(x/s_s))) if x > 0
    W_sutro(Q_max, H_dmax)/2 otherwise
# Vectors for the integration of the width equation used to determine the approximate area at each row
h2(H_dmax) := B_LfomOrifices, 2*B_LfomOrifices .. H_dmax
h1(H_dmax) := 0 cm, B_LfomOrifices .. (H_dmax - B_LfomOrifices)
A_row(Q_max, H_dmax) :=
    h1 ← 0 cm
    h2 ← B_LfomOrifices
    for i ∈ 0 .. H_dmax/B_LfomOrifices
        A_row[i] ← integral(2*y(h, Q_max, H_dmax), h = h1 .. h2)
        h1 ← h2
        h2 ← h2 + B_LfomOrifices
    return A_row
# Determine the fewest number of holes, use rounding
N_LfomOrifice := ceil(A_row(Q_Plant, H_dmax)/A_circle(B_LfomOrifices))
# Area of optimal orifices
A_LfomOrifices := A_row(Q_Plant, H_dmax)/N_LfomOrifice
# Diameter of optimal orifices
D_LfomOrifice := D_circle(A_LfomOrifices)
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# Create the arrays at which to evaluate the LFOM for flow rate and orifice placement
initalloc := 0 cm
Loc_start := Π_Sutro*H_dmax + B_LfomOrifices*Pi_LfomH
H_flowloc(s_s, B_LfomOrifices, HL_Lfom, Loc_start) := rampwithjump(s_s, Loc_start, B_LfomOrifices, HL_Lfom)
H_orificeloc(B_LfomOrifices, HL_Lfom, Pi_LfomH) := rampwithjump(0 cm, s_s, B_LfomOrifices, HL_Lfom)
# locations where we will try to get the target flows is in between orifices at elevation Pi.H
Q_ramp(B_LfomOrifices, HL_Lfom, Pi_LfomH) := H_flowloc(s_s, B_LfomOrifices, HL_Lfom, Loc_start)/HL_Lfom*Q_Plant/N_Lfom  # Target riser flows
# Calculate the flow for a given number of submerged rows of orifices
Q_LfomActual(RowIndexSubmerged, n_Lfomorifices, B_LfomOrifices, D_Lfomorifice, HL_Lfom, Pi_LfomH) :=
    Q ← 0*L/min
    for i ∈ 0 .. RowIndexSubmerged
        Q ← Q + n_Lfomorifices[i]*Q_orifice(D_Lfomorifice, H_flowloc(s_s, B_LfomOrifices, HL_Lfom, Loc_start)[RowIndexSubmerged] - H_orificeloc(B_LfomOrifices, HL_Lfom, Pi_LfomH)[i], Pi_VenaContractaOrifice)
    return Q
# Calculated the optimal orifice diameter based on the diameter of the very highest hole on the LFOM
D_LfomOrifices := RoundNearest(D_LfomOrifice[last(D_LfomOrifice)], D_Drill)
# Calculate number of orifices at each level given a diameter
fN_LfomOrifices(B_LfomOrifices, D_LfomOrifice, HL_Lfom, Pi_LfomH) :=
    Q_ramplocal ← Q_ramp(B_LfomOrifices, HL_Lfom, Pi_LfomH)
    H_ramplocal ← H_orificeloc(B_LfomOrifices, HL_Lfom, Pi_LfomH)
    n[last(H_ramplocal)] ← 0
    for i ∈ 0 .. last(H_ramplocal)
        n[i] ← max(0, round((Q_ramplocal[i] - Q_LfomActual(i, n, B_LfomOrifices, D_LfomOrifice, HL_Lfom, Pi_LfomH))/Q_orifice(D_LfomOrifice, H_flowloc(s_s, B_LfomOrifices, HL_Lfom, Loc_start)[i] - H_orificeloc(B_LfomOrifices, HL_Lfom, Pi_LfomH)[i], Pi_VenaContractaOrifice)))
    return n
# Renaming the function
N_LfomOrifices := fN_LfomOrifices(B_LfomOrifices, D_LfomOrifices, HL_Lfom, Pi_LfomH)
# This function calculates the error of the design based on the differences between the predicted flow rate and the actual flow rate through the LFOM.
Q_LfomError(N_LfomOrifices, B_LfomOrifices, D_LfomOrifices, HL_Lfom, Pi_LfomH, Q_Plant, N_Lfom) :=
    for j ∈ 0 .. last(N_LfomOrifices)
        Q_LfomError[j] ← N_Lfom*(Q_LfomActual(j, N_LfomOrifices, B_LfomOrifices, D_LfomOrifices, HL_Lfom, Pi_LfomH) - Q_ramp(B_LfomOrifices, HL_Lfom, Pi_LfomH)[j])/Q_Plant
    return Q_LfomError
# This funciton returns the maximum error, the absolute valus of the errors is take into account positive and negative errors.
Q_LfomErrorMax := max(sqrt(Q_LfomError(N_LfomOrifices, B_LfomOrifices, D_LfomOrifices, HL_Lfom, Pi_LfomH, Q_Plant, N_Lfom)^2))
Q_LfomErrorMax = 0.0470002 %
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# This graph plots the error as a function height of water in the entrance tank.
N_LfomOrifices = [59; 16; 24; 12; 14; 10; 11; 9; 9; 9; 7; 9; 7; 7; 7; 6; 7; 7; 5; 7; 5]
# Nominal Pipe Size of each riser. This will also be the size of rapid mix pipe.
# The depth of the Entrance Tank is calculated to have the same depth as the floc tank plus a depth to account for the headloss through the Lfom.
# Need to check to see if these are actually returning the correct dimensions from the pipe database
HL_EtFloc := 5 cm
ZW_Et := HW_FlocStart + HL_Lfom + H_LfomFreefall + HL_EtFloc  # error: This variable is undefined.
HW_EtMax := HW_EtMin + HL_Lfom = 0.4 m
H_Et := ZW_Et + H_PlantFreeboard  # error: This variable is undefined.
H_LfomSF := 5 cm
# Need to calculate the riser height, but we need to define how pipe lengths are calculated. Do they include the part that is inserted in the socket?
L_Lfom := H_Et - H_LfomSF  # error: This variable is undefined.
