# AguaClara Water Treatment Plants -- Ecuador
# Automated Design
# User Inputs:
HW_Sed := 1.55 m
# Design References
# [reference: UserInputs- Ecuador.xmcd]
# [reference: DesignAssumptions- Ecuador.xmcd]
# [reference: MathFunctions - Ecuador.xmcd]
# [reference: PipeDatabase - Ecuador.xmcd]
# [reference: MinorLossCoefficients - Ecuador.xmcd]
# [reference: FluidsFunctions - Ecuador.xmcd]
# Sed Tanks and Slopes:
# [reference: Influent sed manifold - Ecuador.xmcd]
N_SedTanks = 2
A_SedPort(Π_SedCell, K_PipeEnt, Q_SedSlopePort, ED_Slope, Pi_VenaContractaOrifice) = 33.608 cm^2
H_SedBetween = 0.0762 m
HW_Sed = 1.55 m
B_SedPort = 5.79724 cm
.
L_Sed = 2.01242 m
L_SedPort = 6.69407 cm
W_SedPort = 5.79724 cm
B_SedPort = 5.79724 cm
W_Sed = 0.92 m
N_SedPorts = 17
ND_SedPipeEntrance = 6 in
# H.SedRectangle needs to be greater than H.SedPort
N_SedManifolds = 2
Π_SedCell = 2
L_Sed = 2.01242 m
N_SlopePairs = 1
L_SedMax = 5.27532 m
# Sedimentation Tank Sludge Drain:
# [reference: SludgeDrain-Ecuador.xmcd]
N_SedSludgeOrifices = 13
Time_SludgeDrain = 0.278704 hr
ND_SedSludge = 2 in
Q_SludgeDrainInitial = 26.4016 L/min
D_SedSludgeOrifice = 0.5 in
# Sedimentation Tank Dimensions:
# [reference: Sedimentation Dimensions - Ecuador.xmcd]
H_SedBottomSlope = 0.0811104 m
H_SedTopSlope = 0.696332 m
H_SlopeRectangle = 0.08 m
Z_SedSlopes = 0.936657 m
H_Sed = 1.65 m
W_Sed = 0.92 m
# Inlet Channel:
# [reference: Inlet Channel - Ecuador.xmcd]
W_InletChannel = 20.8275 cm
L_Channel = 2.14 m
ND_SedPipeEntrance = 6 in
N_SedInletPipes = 2
H_InletChannel = 0.563343 m
Q_Plant = 47.551 gal/min
# Sedimentation Tank Effluent Launder:
# [reference: Launder - Ecuador.xmcd]
N_SedLaunderOrifices = 28
ND_SedLaunderEst = 3 in
Q_SedLaunderOrifices = 1.60714 L/min
# Exit Channel:
# [reference: Exit Channel - Ecuador.xmcd]
W_ExitChannel = 0.208275 m
ND_SedLaunder = 3 in
H_ExitChannel = 0.563343 m
L_SedLaunder = 1.44587 m
L_ExitChannel = 2.14 m
D_SedLaunderOrifice = 0.3125 in
H_PltWeir = 0.393256 m
Z_SedLaunder = 1.46555 m
HW_ExitChannel = 0.423343 m
ZW_ExitChannel = 1.51 m
# Lamella:
# [reference: Lamella - Ecuador.xmcd]
L_SedPlate = 0.471398 m
B_SedPlate = 1.63681 cm
S_SedPlate = 1.33681 cm
N_SedPlates = 58
AN_SedPlate = 60 deg
V_SedC = 10.0769 m/day
V_SedUp = 70 m/day
H_SedPlate = 0.408243 m
H_SedAbove = 0.1289 m
# Flow Controller:
# [reference: FCM - Ecuador.xmcd]
N_Fcm = 1
ID_FcmTube = 3.175 mm
ID_FcmTube = 0.125 in
L_FcmTube = 209.132 cm
Q_FcmTubeMax = 135 mL/min
HL_FcmValve = 3.386 cm
# Flocculator:
# [reference: Flocculation - Ecuador.xmcd]
W_FlocChannel = 0.46 m
S_FlocBaffle = [6.1652; 8.71891; 15.1016] cm
B_FlocBaffle = [6.5652; 9.11891; 15.5016] cm
N_FlocBafflesMin = 71
HL_Floc = 6.96052 cm
X_FlocBaffles = [
    0.61, 1.93577, 0.076652, 1.93577, 0.076652, 1.93577;
    0.675652, 1.87012, 0.167841, 1.78075, 0.231668, 1.78075;
    0.741304, 1.77893, 0.25903, 1.62574, 0.386684, 1.62574;
    0.806956, 1.68774, 0.414046, 1.47072, 0.5417, 1.47072;
    0.872608, 1.59655, 0.569062, 1.31571, 0.696716, 1.31571;
    0.93826, 1.50536, 0.724078, 1.16069, 0.851732, 1.16069;
    1.00391, 1.41417, 0.879094, 1.00567, 1.00675, 1.00567;
    1.06956, 1.32298, 1.03411, 0.850659, 1.16176, 0.850659;
    1.13522, 1.23179, 1.18913, 0.695643, 1.31678, 0.695643;
    1.20087, 1.14061, 1.34414, 0.540627, 1.4718, 0.540627;
    1.26652, 1.04942, 1.49916, 0.385611, 1.62681, 0.385611;
    1.33217, 0.958227, 1.65417, 0.230595, 1.78183, 0.230595;
    1.39782, 0.867038, 1.80919, 0, 0, 0;
    1.46348, 0.775849, 0, 0, 0, 0;
    1.52913, 0.68466, 0, 0, 0, 0;
    1.59478, 0.593471, 0, 0, 0, 0;
    1.66043, 0.502282, 0, 0, 0, 0;
    1.72608, 0.411093, 0, 0, 0, 0;
    1.79174, 0.319903, 0, 0, 0, 0;
    1.85739, 0.228714, 0, 0, 0, 0;
    1.92304, 0.137525, 0, 0, 0, 0
] m
HW_FlocStart = 1.61961 m
L_FlocBaffles = [
    1.48835, 1.48835, 1.46281, 1.39898, 1.39898, 1.39898;
    1.58835, 1.58835, 1.56281, 1.49898, 1.49898, 1.49898;
    1.48835, 1.46281, 1.46281, 1.39898, 1.39898, 1.39898;
    1.58835, 1.56281, 1.49898, 1.49898, 1.49898, 1.49898;
    1.48835, 1.46281, 1.39898, 1.39898, 1.39898, 1.39898;
    1.58835, 1.56281, 1.49898, 1.49898, 1.49898, 1.49898;
    1.48835, 1.46281, 1.39898, 1.39898, 1.39898, 1.39898;
    1.58835, 1.56281, 1.49898, 1.49898, 1.49898, 1.49898;
    1.48835, 1.46281, 1.39898, 1.39898, 1.39898, 1.39898;
    1.58835, 1.56281, 1.49898, 1.49898, 1.49898, 1.49898;
    1.48835, 1.46281, 1.39898, 1.39898, 1.39898, 1.39898;
    1.58835, 1.56281, 1.49898, 1.49898, 1.49898, 1.49898;
    1.48835, 1.46281, 1.39898, 0, 0, 0;
    1.58835, 1.56281, 0, 0, 0, 0;
    1.48835, 1.46281, 0, 0, 0, 0;
    1.58835, 1.56281, 0, 0, 0, 0;
    1.48835, 1.46281, 0, 0, 0, 0;
    1.58835, 1.56281, 0, 0, 0, 0;
    1.48835, 1.46281, 0, 0, 0, 0;
    1.58835, 1.56281, 0, 0, 0, 0;
    1.48835, 1.46281, 0, 0, 0, 0
] m
W_FlocPort = 0.061652 m
H_FlocPort = 1.12677 m
N_FlocBaffles = 91
Z_FlocBaffles = [
    0, 0, 0, 0, 0, 0;
    0.061652, 0.061652, 0.0871891, 0.151016, 0.151016, 0.151016;
    0, 0, 0, 0, 0, 0;
    0.061652, 0.0871891, 0.151016, 0.151016, 0.151016, 0.151016;
    0, 0, 0, 0, 0, 0;
    0.061652, 0.0871891, 0.151016, 0.151016, 0.151016, 0.151016;
    0, 0, 0, 0, 0, 0;
    0.061652, 0.0871891, 0.151016, 0.151016, 0.151016, 0.151016;
    0, 0, 0, 0, 0, 0;
    0.061652, 0.0871891, 0.151016, 0.151016, 0.151016, 0.151016;
    0, 0, 0, 0, 0, 0;
    0.061652, 0.0871891, 0.151016, 0.151016, 0.151016, 0.151016;
    0, 0, 0, 0, 0, 0;
    0.061652, 0.0871891, 0, 0, 0, 0;
    0, 0, 0, 0, 0, 0;
    0.061652, 0.0871891, 0, 0, 0, 0;
    0, 0, 0, 0, 0, 0;
    0.061652, 0.0871891, 0, 0, 0, 0;
    0, 0, 0, 0, 0, 0;
    0.061652, 0.0871891, 0, 0, 0, 0;
    0, 0, 0, 0, 0, 0
] m
Gt_FlocMinFlow = 9000.54
N_FlocChannels = 6
# Entrance Tank:
# [reference: EntranceTank- Ecuador.xmcd]
ND_Lfom = 12 in
HL_Rm = 0.898175 cm
N_Lfom = 1
D_LfomOrifices = 9.525 mm
Q_LfomErrorMax = 0.0474448 %
N_LfomOrifices = [59; 19; 20; 14; 12; 12; 9; 10; 9; 9; 8; 7; 8; 7; 7; 7; 6; 6; 7; 5; 7]
L_Et = 1.5 m
W_Et = 0.75 m
HW_EtMin = 0.2 m
HW_EtMax = 0.4 m
H_Et = 2.01961 m
ZW_Et = 1.91961 m
# Any additional needed elevations should be calculated in the files above.
# Elevations:
ZW_ExitChannel = 1.51 m  # Water Level at the end of the plant in the exit channel and exit channel box
HW_Sed = 1.55 m
HW_FlocStart = 1.61961 m  # Water level at the beginning of the floc tank
HL_Floc = 6.96052 cm  # just for ref. the head loss throught the floc tank
ZW_Et = 1.91961 m  # the height of the water in the entrance tank.
# AutoCAD References
# [reference: basics.xmcd]
# [reference: pipe.xmcd]
# [reference: tank.xmcd]
# [reference: lamina.xmcd]
# [reference: laminaplain.xmcd]
# [reference: cross.xmcd]
# [reference: Tee.xmcd]
# [reference: elbow.xmcd]
# [reference: Sludge.xmcd]
# [reference: Channel.xmcd]
# [reference: Manifold.xmcd]
# [reference: SedTankslopes.xmcd]
# [reference: inletslope.xmcd]
# [reference: inletslopetrapezoid.xmcd]
# [reference: chemicalstock.xmcd]
# [reference: Sedimentation Tank.xmcd]
# [component: inputs SedTank]
# [reference: Flocculation Tank.xmcd]
# [component: inputs FlocTank]
# [reference: Entrance Tank.xmcd]
# [component: inputs EntranceTank]
