# Flocculation Function
# The Flocculator program should be calculating the spacing between baffles for all sections. the number of baffles in each section and the placement of the baffles throughout the flocculator.
# References:
# The length of one channel of the flocculator is equal to the length of a sed tank . Therefore the total length is equal to the number of channels times the length of a sed tank. The width of a flocculator is equal to the width of a sed tank divided by the number of channels (to make "upward velocity" equal in the two tanks. The water depth at the end of the flocculaor must be the same as the water depth in the sed tank.
# Floc Calculations:
W_FlocChannel := N_FlocWidthFactor*W_SedSingle/2 = 0.92 m
ED_Floc := G_FlocBodMin^2*Nu_Water = 0.4 mW/kg
S_FlocBaffle := (K_FlocBaffle180*Q_Plant^3/(2*Π_FlocCell*ED_Floc*W_FlocChannel^3))^(1/4) = 8.97946 cm
# This is the maximum flow rate that can be accomodated with this width and depth of channel. If the flow rate is greater than this value there will be short circuiting in the flocculator. This should somehow be implemented as a check in LabVIEW to guide the designer in setting the plant dimensions. Or maybe we need to develop an algorithm to set the channel width.
B_FlocBaffle := S_FlocBaffle + T_FlocBaffle = 9.37946 cm
Q_Plant = L/s
L_FlocTankEst := Q_Plant*θ_FlocEst/(HW_Sed*W_FlocChannel) = 2.52454 m
3*L/s*20*min = 3600 L
N_FlocChannels := ceil(L_FlocTankEst/L_Sed) = 2
N_FlocBafflesSection := floor(L_Sed/B_FlocBaffle) = 21
L_FlocTank := N_FlocChannels*L_Sed = 4.02484 m
N_FlocBaffles := floor(L_Sed/B_FlocBaffle)*N_FlocChannels = 42
θ_Floc := L_FlocTank*W_FlocChannel*HW_Sed/Q_Plant = 31.8857 min
Gt_Floc := G_FlocBodMin*θ_Floc = 38262.9
HL_FlocBaffle := h_erect(Q_Plant, W_FlocChannel, S_FlocBaffle, K_FlocBaffle180) = 0.0201714 cm
# calculates the head loss per baffle and then finds the total headloss
# This head loss calculation is based on the ideal design that doesn't yet account for how the baffles are actually placed in the channels. The error will be small since it is the last section of baffle spacings that might have a different number of baffles
HL_Floc := N_FlocBaffles*HL_FlocBaffle = 0.8472 cm
# Calculate the water level at the entrance to the floc tank
HW_FlocStart := HW_Sed + HL_Floc = 1.55847 m
H_Floc := HW_FlocStart + H_PlantFreeboard = 1.65847 m
# G at the port is based on the G at the end of the flocculator because the low G region of the flocculator is so long.
W_FlocPort := S_FlocBaffle + S_FlocPort = 10.4795 cm
H_FlocPort := W_FlocChannel*S_FlocBaffle*Pi_FlocBaffle/W_FlocPort = 0.788314 m
# Now we need to assign positions, lengths and elevations to floc baffles
L_FlocBaffleLower := HW_Sed - S_FlocBaffle*Pi_FlocBaffle = 1.46021 m
L_FlocBaffleUpper := H_Sed - S_FlocBaffle*Pi_FlocBaffle = 1.56021 m
L_BaffleSection := L_FlocTank = 4.02484 m
# This calculates the length of flocculator taken up by each section of baffles
# First baffle is a lower baffle because rapid mix pipe enters low
# Ideally have odd number of baffles in first channel (enter low, exit low)
# Ideally have even number of baffles in 2nd channel (enter low, exit high), but I haven't done any coding to get the right number of baffles (odd or even). The fit of the baffles could potentially be improved by
Loc_FlocBaffles :=
    X[0, N_FlocChannels - 1] ← 0 m
    L[0, N_FlocChannels - 1] ← 0 m
    Z[0, N_FlocChannels - 1] ← 0 m
    section ← 0
    BafflesInSection ← 0
    X[0, 0] ← W_FlocChannel + T_ChannelWall
    for Channel ∈ 0 .. N_FlocChannels - 1
        i ← 0
        X_FirstBaffleInChannel ← W_FlocChannel + T_ChannelWall if Channel == 0
        X_FirstBaffleInChannel ← W_FlocPort + S_FlocPort otherwise
        X[i, Channel] ← X_FirstBaffleInChannel
        L[i, Channel] ← L_FlocBaffleLower[section]
        Z[i, Channel] ← 0 m
        X_LastBaffleInChannel ← L_Sed - (W_InletChannel + S_FlocPort) if Channel == N_FlocChannels - 1
        X_LastBaffleInChannel ← L_Sed - (W_FlocPort + S_FlocPort) otherwise
        while X[i, Channel] + B_FlocBaffle[section] < X_LastBaffleInChannel
            i ← i + 1
            BafflesInSection ← BafflesInSection + 1
            if BafflesInSection == N_FlocBaffleSection[section] and section < last(G_FlocBod)
                section ← section + 1
                BafflesInSection ← 1
            X[i, Channel] ← X[i - 1, Channel] + B_FlocBaffle[section]
            if mod(i, 2) == 1
                L[i, Channel] ← L_FlocBaffleUpper[section]
                Z[i, Channel] ← S_FlocBaffle[section]*Pi_FlocBaffle
            otherwise
                L[i, Channel] ← L_FlocBaffleLower[section]
                Z[i, Channel] ← 0 m
        for k ∈ 0 .. last(X[:, 0])
            X[k, Channel] ← L_Sed - X[k, Channel] if mod(Channel, 2) == 1 and X[k, Channel] ≠ 0
    return [X, L, Z]
# section is index of the spacing of baffles
# First baffle is away from wall to allow elbow to deflect water downward
# This code works with any number of flocculator channels
# i is the number of baffles in a channel
# Each channel starts with a lower baffle
# Move to the next spacing if baffles in section equals target number of baffles in section and if the section isn't the last section
# Mod handles the odd and even baffles
# Reverse the direction of odd numbered channels
X_FlocBaffles := Loc_FlocBaffles[0, 0]
L_FlocBaffles := Loc_FlocBaffles[0, 1]
Z_FlocBaffles := Loc_FlocBaffles[0, 2]
N_FlocBaffles :=
    N ← 0
    i ← 0
    Channel ← 0
    for Channel ∈ 0 .. N_FlocChannels - 1
        for i ∈ 0 .. last(X_FlocBaffles[:, 0])
            N ← N + 1 if X_FlocBaffles[i, Channel] ≠ 0 m
    return N
Gt_FlocMinFlow := N_FlocBaffles*Gt_FlocBaffleMin
