# AguaClara Water Treatment Plants -- Ecuador
# Automated Design
# User Inputs:
HW_Sed := 1.55 m
# Design References
# [reference: UserInputs- Ecuador.xmcd]
# [reference: DesignAssumptions- Ecuador.xmcd]
# [reference: MathFunctions - Ecuador.xmcd]
# [reference: PipeDatabase - Ecuador.xmcd]
# [reference: MinorLossCoefficients - Ecuador.xmcd]
# [reference: FluidsFunctions - Ecuador.xmcd]
# Sed Tanks and Slopes:
# [reference: Influent sed manifold - Ecuador.xmcd]
N_SedTanks = 2
A_SedPort(Π_SedCell, K_PipeEnt, Q_SedSlopePort, ED_Slope, Pi_VenaContractaOrifice) = 33.608 cm^2
H_SedBetween = 0.0762 m
HW_Sed = 1.55 m
B_SedPort = 5.79724 cm
.
L_Sed = 2.01242 m
L_SedPort = 6.69407 cm
W_SedPort = 5.79724 cm
B_SedPort = 5.79724 cm
W_Sed = 0.92 m
N_SedPorts = 17
ND_SedPipeEntrance = 6 in
# H.SedRectangle needs to be greater than H.SedPort
N_SedManifolds = 2
Π_SedCell = 2
L_Sed = 2.01242 m
N_SlopePairs = 1
L_SedMax = 5.27532 m
# Sedimentation Tank Sludge Drain:
# [reference: SludgeDrain-Ecuador.xmcd]
N_SedSludgeOrifices = 13
Time_SludgeDrain = 0.178371 hr
ND_SedSludge = 2 in
Q_SludgeDrainInitial = 41.2525 L/min
D_SedSludgeOrifice = 0.625 in
# Sedimentation Tank Dimensions:
# [reference: Sedimentation Dimensions - Ecuador.xmcd]
H_SedBottomSlope = 0.0811104 m
H_SedTopSlope = 0.696332 m
H_SlopeRectangle = 0.08 m
Z_SedSlopes = 0.936657 m
H_Sed = 1.65 m
W_Sed = 0.92 m
# Inlet Channel:
# [reference: Inlet Channel - Ecuador.xmcd]
W_InletChannel = 20.8275 cm
L_Channel = 2.14 m
ND_SedPipeEntrance = 6 in
N_SedInletPipes = 2
H_InletChannel = 0.563343 m
Q_Plant = 47.551 gal/min
# Sedimentation Tank Effluent Launder:
# [reference: Launder - Ecuador.xmcd]
N_SedLaunderOrifices = 28
ND_SedLaunderEst = 3 in
Q_SedLaunderOrifices = 1.60714 L/min
# Exit Channel:
# [reference: Exit Channel - Ecuador.xmcd]
W_ExitChannel = 0.208275 m
ND_SedLaunder = 3 in
H_ExitChannel = 0.563343 m
L_SedLaunder = 1.44587 m
L_ExitChannel = 2.14 m
D_SedLaunderOrifice = 0.3125 in
H_PltWeir = 0.393256 m
Z_SedLaunder = 1.46555 m
HW_ExitChannel = 0.423343 m
ZW_ExitChannel = 1.51 m
# Lamella:
# [reference: Lamella - Ecuador.xmcd]
L_SedPlate = 0.471398 m
B_SedPlate = 1.63681 cm
S_SedPlate = 1.33681 cm
N_SedPlates = 58
AN_SedPlate = 60 deg
V_SedC = 10.0769 m/day
V_SedUp = 70 m/day
H_SedPlate = 0.408243 m
H_SedAbove = 0.1289 m
# Flow Controller:
# [reference: FCM - Ecuador.xmcd]
N_Fcm = 1
ID_FcmTube = 3.175 mm
ID_FcmTube = 0.125 in
L_FcmTube = 209.132 cm
Q_FcmTubeMax = 135 mL/min
HL_FcmValve = 3.386 cm
# Flocculator:
# [reference: Flocculation -Ecuador Energy Dissapation.xmcd]
W_FlocChannel =  # error: This variable is undefined.
S_FlocBaffle =  # error
B_FlocBaffle =  # error
N_FlocBafflesMin =  # error
HL_Floc =  # error
X_FlocBaffles =  # error
HW_FlocStart =  # error
L_FlocBaffles =  # error
W_FlocPort =  # error
H_FlocPort =  # error
N_FlocBaffles =  # error
Z_FlocBaffles =  # error
Gt_FlocMinFlow =  # error
N_FlocChannels =  # error
# Entrance Tank:
# [reference: EntranceTank- Ecuador.xmcd]
ND_Lfom = 6 in
HL_Rm = 0.929191 cm
N_Lfom = 1
D_LfomOrifices = 9.525 mm
Q_LfomErrorMax = 0.309133 %
N_LfomOrifices = [11; 3; 3; 3; 3; 1; 2; 2; 2; 1; 1; 2; 1; 2; 1; 1; 1; 1; 2; 0; 2]
L_Et = 1.5 m
W_Et = 0.75 m
HW_EtMin = 0.2 m
HW_EtMax = 0.4 m
H_Et =  # error
ZW_Et =  # error
# Any additional needed elevations should be calculated in the files above.
# Elevations:
ZW_ExitChannel = 1.51 m  # Water Level at the end of the plant in the exit channel and exit channel box
HW_Sed = 1.55 m
HW_FlocStart =  # error  # Water level at the beginning of the floc tank
HL_Floc =  # error  # just for ref. the head loss throught the floc tank
ZW_Et =  # error  # the height of the water in the entrance tank.
# AutoCAD References
# [reference: basics.xmcd]
# [reference: pipe.xmcd]
# [reference: tank.xmcd]
# [reference: lamina.xmcd]
# [reference: laminaplain.xmcd]
# [reference: cross.xmcd]
# [reference: Tee.xmcd]
# [reference: elbow.xmcd]
# [reference: Sludge.xmcd]
# [reference: Channel.xmcd]
# [reference: Manifold.xmcd]
# [reference: SedTankslopes.xmcd]
# [reference: inletslope.xmcd]
# [reference: inletslopetrapezoid.xmcd]
# [reference: chemicalstock.xmcd]
# [reference: Sedimentation Tank.xmcd]
# [component: inputs SedTank]
# [reference: Flocculation Tank.xmcd]
# [component: inputs FlocTank]
# [reference: Entrance Tank.xmcd]
# [component: inputs EntranceTank]
