# AguaClara Water Treatment Plants
# Automated Design
# Add variable descriptions next to every varible so it is easy to interpret what this all means.
AguaClaraDesignToolVersion := 10  # This is used by LabVIEW to confirm that a valid design tool program is open
# User Inputs:
HW_Sed := 1.55 m
# Design References
# [reference: UserInputs- EcuadorF.xmcd]
# Use BasicClientInputs and ExpertClientInputs when this is run by LabVIEW.
# Use BasicInputs and ExpertInputs to use the program in MathCAD
# Change the reference by
# - right clicking
# - select properties
# - reference tab
# - type in the correct file name
# [reference: ExpertInputs - EcuadorF.xmcd]
# [reference: DesignAssumptions- EcuadorF.xmcd]
# [reference: MathFunctions - EcuadorF.xmcd]
# [reference: PipeDatabase - EcuadorF.xmcd]
# [reference: MinorLossCoefficients - EcuadorF.xmcd]
# [reference: FluidsFunctions - EcuadorF.xmcd]
# Sed Tanks and Slopes:
# [reference: Influent sed manifold - EcuadorF.xmcd]
N_SedTanks = 2
B_SedPort = 5.41134 cm  # Height of the narrowest part of the manifold ports
W_SedPort = 5.41134 cm
H_SedBetween = 7.62 cm  # Distance from the top of the inlet manifold to the bottom of the ledge supporting the lamella frame
N_SedPorts = 36  # per bay
L_Sed = 2.01242 m
N_SedBays = 1  # Number of bays of inlet manifolds in each sed tank
A_SedPort = 29.2826 cm^2  # Port Area
L_SedPort = 6.24847 cm  # Length of the port through which water exits the inlet manifold
W_SedSludgeFlat = 5 cm  # Distance between tips of manifold plates (space alloted for the drain holes
W_SedSlopePlate = 30 cm  # Width of ferrous cement plates in whice one manifold port is cut
AN_SedTopInlet = 60 deg  # Angle of the top of the inlet manifold
Q_SedBay = 1.5 L/s
AN_SedBottom = 10 deg  # Angle of the bottom of inlet manifold
# Sedimentation Tank Sludge Drain:
# [reference: SludgeDrain-EcuadorF.xmcd]
N_SedSludgeOrifices = 13  # per cell
W_SedSludge = 4.05366 cm  # Width of the sludge channel
Ti_SludgeDrain = 30 min  # Tank Drain time
H_SedSludge = 5 cm  # Depth of the sludge channel
B_SedSludgeOrifices = 15 cm  # Distance center to center between drain orifices
T_SedSludge = 9.33013 cm
# Thickness of the plate topping the sludge channel
# through which drain holes are formed
D_SedSludgeOrifice = 0.5625 in  # Diameter of drain orifices
# Sedimentation Tank Dimensions:
# [reference: Sedimentation Dimensions - EcuadorF.xmcd]
Z_SedSludge = 14.3301 cm  # Height from 0 of the top of the sludge drain
H_SedBottomSlope = 0.0690671 m  # Height of the bottom slope
H_SedTopSlope = 0.635141 m  # Height of the top of the inlet manifold
Z_SedSlopes = 0.878442 m  # Height from 0 of the top of the inlet manifold
H_Sed = 1.65 m  # Total tank wall height
W_Sed = 0.92 m  # Total tank width
L_Sed = 2.01242 m  # Total tank length
# Inlet Channel:
# [reference: Inlet Channel - EcuadorF.xmcd]
W_InletChannel = 0.145453 m
L_Channel = 2.14 m
W_SedManifoldEntrance = 0.0438533 m  # Width of the drop chimneys connecting channel to sed inlet manifolds
L_SedManifoldEntrance = 0.391699 m  # length of drop chimmneys
N_SedInletPipes = 2  # per sed bay
H_InletChannel = 0.545358 m
# Sedimentation Tank Effluent Launder:
# [reference: Launder - EcuadorF.xmcd]
N_SedLaunderOrifices = 30  # Number of orifices per launder
# How many launders per cell?
# What is the spacing of the orfices?
# How many rows of orifices per launder?
Q_SedLaunderOrifices = 1.5 L/min
B_SedLaunderOrifices = 0.1 m  # Center to center launder spacing
# Exit Channel:
# [reference: Exit Channel - EcuadorF.xmcd]
W_ExitChannel = 0.145453 m
ND_SedLaunder = 3 in
H_ExitChannel = 0.545358 m
L_SedLaunder = 1.57152 m
L_ExitChannel = 2.14 m
H_PltWeir = 0.375271 m  # height of the weir carrying water to the distribution tank
D_SedLaunderOrifice = 0.3125 in
HW_ExitChannel = 0.405358 m
Z_SedLaunder = 1.46555 m  # height from 0 of the launder
ZW_ExitChannel = 1.51 m  # water height in exit channel from 0
# Lamella:
# [reference: Lamella - EcuadorF.xmcd]
L_SedPlate = 0.468962 m
B_SedPlate = 1.84099 cm  # center to center distance between lamella
S_SedPlate = 1.54099 cm  # spacing between lamella
N_SedPlates = 57  # Number of Sed Plates per Sedimentation Tank Bay.
AN_SedPlate = 60 deg
V_SedC = 10.0406 m/day
V_SedUp = 70 m/day
H_SedPlate = 0.406133 m
H_SedAbove = 0.1289 m  # Height of water needed above the lamella
# Sedimentation Tank Floc Hopper:
# [reference: Floc Hopper - EcuadorF.xmcd]
A_FlocHopper = 0.46656 m^2
L_FlocHopper = 0.50713 m  # Length of the hopper cement plate
L_FlocHopperOffset = 0.234481 m  # distance from the edge of the channel to the bottom of the first lamella (collection distance)
W_FlocHopper = 0.92 m  # width of the hopper set within each bay
# Flow Controller:
# [reference: FCM.xmcd]
N_Fcm = 1
ID_FcmTube = 3.175 mm
ID_FcmTube = 0.125 in
L_FcmTube = 209.132 cm
Q_FcmTubeMax = 135 mL/min
HL_FcmValve = 3.386 cm
# Flocculator: | Look at Flocculator Positioning arrays
# [reference: Flocculation Energy Dissapation - EcuadorF.xmcd]
W_FlocChannel = 0.45 m
L_Sed = 2.01242 m  # Fill last channel with bafffles from last channel
# Fix port width to be based on energy dissipation in that channel
# Adjust spacing after the number of baffles per channel is known.
ED_Floc = [6.4; 1.6; 0.4] mW/kg
# Check the residence time of the flocculator should be at least 20minutes
S_FlocBaffle = [4.14307; 6.57671; 10.4399] cm
B_FlocBaffle = [4.34307; 6.77671; 10.6399] cm
HW_FlocEnd = 1.55 m
L_FlocBaffles = [
    1.50857, 1.48423, 1.4456;
    1.81377, 1.78943, 1.7508;
    1.50857, 1.48423, 1.4456;
    1.81377, 1.78943, 1.7508;
    1.50857, 1.48423, 1.4456;
    1.81377, 1.78943, 1.7508;
    1.50857, 1.48423, 1.4456;
    1.81377, 1.78943, 1.7508;
    1.50857, 1.48423, 1.4456;
    1.81377, 1.78943, 1.7508
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] m
X_FlocBaffles = [
    1.90602, 1.89302, 1.89302;
    1.86259, 1.82526, 1.78662;
    1.81916, 1.75749, 1.68023;
    1.77573, 1.68972, 1.57383;
    1.7323, 1.62196, 1.46743;
    1.68887, 1.55419, 1.36103;
    1.64544, 1.48642, 1.25463;
    1.60201, 1.41865, 1.14823;
    1.55858, 1.35089, 1.04183;
    1.51515, 1.28312, 0.935435
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] m
N_FlocChannels = 3
L_FlocTank = 6.03727 m
N_FlocBaffleSection = [25; 25; 25]
3*21 = 63
HL_Floc = 20.5196 cm
HW_FlocStart = 1.7552 m
Z_FlocBaffles = [
    0, 0, 0;
    0.0414307, 0.0657671, 0.104399;
    0, 0, 0;
    0.0414307, 0.0657671, 0.104399;
    0, 0, 0;
    0.0414307, 0.0657671, 0.104399;
    0, 0, 0;
    0.0414307, 0.0657671, 0.104399;
    0, 0, 0;
    0.0414307, 0.0657671, 0.104399
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] m
W_FlocPort = 0.104399 m
H_FlocPort = 0.539897 m
Ti_Floc = 23.3944 min  # residence time of the flocculator
# Entrance Tank:
# [reference: EntranceTankDim - EcuadorF.xmcd]
L_Et = 2.01242 m  # length of the entrance tank
W_Et = 0.45 m  # width of the entrance tank
HW_EtMin = 0.2 m
HW_EtMax = 0.4 m
H_Et = 2.1552 m  # height of the entrance tank
ZW_Et = 2.0552 m
L_Grit = 0.822857 m
# Any additional needed elevations should be calculated in the files above.
# Elevations:
ZW_ExitChannel = 1.51 m  # Water Level at the end of the plant in the exit channel and exit channel box
HW_Sed = 1.55 m
HW_FlocStart = 1.7552 m  # Water level at the beginning of the floc tank
HL_Floc = 20.5196 cm  # just for ref. the head loss throught the floc tank
ZW_Et = 2.0552 m  # the height of the water in the entrance tank.
# AutoCAD References
# [reference: basics.xmcd]
# [reference: pipe.xmcd]
# [reference: tank.xmcd]
# [reference: lamina.xmcd]
# [reference: laminaplain.xmcd]
# [reference: cross.xmcd]
# [reference: Tee.xmcd]
# [reference: elbow.xmcd]
# [reference: Sludge.xmcd]
# [reference: Channel.xmcd]
# [reference: Manifold.xmcd]
# [reference: SedTankslopes.xmcd]
# [reference: inletslope.xmcd]
# [reference: inletslopetrapezoid.xmcd]
# [reference: chemicalstock.xmcd]
# [reference: Sedimentation Tank.xmcd]
# [component: inputs SedTank]
# [reference: Flocculation Tank.xmcd]
# [component: inputs FlocTank]
# [reference: Entrance Tank.xmcd]
# [component: inputs EntranceTank]
