# Sedimentation Tank Inlet Slopes -- Triangles
# This program produces the critical parameters for a single sed tank. All sed tanks are built identically.
# Each tank should have the same flowrate. The total space below the tank is 1 m (design assumption). Part of this space will have sloped walls (to help with draining) and part might have
# straight walls. The length of the sloped walls is determined by the tank width and the
# slope of the walls (they should be between 45 and 60 deg). The space between the top
# of the plate settlers and the water surface is equal to .25*spacing between adjacent launders.
# Since each tank has 1 launderer, the space between adjacent ones is equal to the tank width.
# This should ensure equal flow of effluent through these pipes. The depth of the middle section of
# the tank is determined by the length and slope of the plate settlers. The total depth of the tank is
# equal to the sum of these three depths, plus a freeboard depth. Freeboard space is empty space between the top of the tank and the water surface
Q_Sed := Q_Plant/N_SedTanks = 190 L/min
Q_SedSlopePort := V_SedUpBod*W_SedSingle/2*W_SedSlopePlate = 7.87135 L/min
# for kinetic energy lost when a jet enters a reservoir (this neglects effect of the vena contracta)
# at the end of the floc tank
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B_SedPortEst := (K_SedSlopeExit*Q_SedSlopePort^3/(2*Π_SedCell*ED_Slope))^(1/7) = 5.44068 cm
# But this solution doesn't take into account the vena contracta through the port. Assume the vena contracta area is 0.6 and increase the
B_SedPort := B_SedPortEst/sqrt(Pi_VenaContractaOrifice) = 6.85462 cm
Pi_VenaContractaOrifice*B_SedPort^2 == B_SedPortEst^2
# Thus the ports should be 7 cm by 7 cm. The ports should also be staggered so that they alternate from side to side to minimize the dead zones in the bottom of the tank.
# We need to design the size of the sludge drain orifices. The orifices should be in all of the dead zones between the ports. The total area of the orifices should be approximately 1/4 of the area of the rectangular sludge manifold (which I have suggested is 5 cm deep and 10 cm wide).
W_SedSlopeTri := W_SedSingle/2 - B_SedPort - T_SedInletSlope
V_SedPort := Q_SedSlopePort/B_SedPort^2 = 2.7921 cm/s
V_SedSlopeTri := V_SedPort/3 = 0.930702 cm/s
A_SedSlopeTri := 1/2*W_SedSlopeTri^2*(tan(AN_SedTopInlet) - tan(AN_SedBottom)) = 0.138003 m^2
L_SedMax := V_SedSlopeTri*A_SedSlopeTri/(V_SedUpBod*W_SedSingle/2) = 2.93711 m
Q_SedInlet := V_SedSlopeTri*A_SedSlopeTri = 77.0635 L/min
L_SedTotal := Q_Plant/(V_SedUpBod*W_SedSingle/2) = 14.4829 m
# The tank was forced to be of a single sed tank width. should be altered for general porgram
L_Sed := Q_SedInlet/(V_SedUpBod*W_SedSingle/2) = 2.93711 m
N_Slopes := L_SedTotal/L_Sed = 4.931  # This variable is redundant with N.TriangleperTank . Different number here because tank forced to be one width
N_TrianglesperTank :=
    slopes ← ceil(N_Slopes/N_SedTanks) if N_Slopes/N_SedTanks - trunc(N_Slopes/N_SedTanks) > 0.2
    slopes ← floor(N_Slopes/N_SedTanks) otherwise
    slopes ← slopes + 1 if round(round(slopes/2) - (slopes/2)) == 1
    return slopes
N_SlopePairs := N_TrianglesperTank/2
L_SedPort := B_SedPort/sin(AN_SedTopInlet)
W_SedPort := L_SedPort = 0.0791503 m  # Setting the port to be a square
N_SedPorts := ceil(L_Sed/W_SedSlopePlate) = 10
W_Sed := W_SedSingle*N_SlopePairs
ND_SedPipeEntrance :=
    ND_SedPipeEntrance ← ND_SedInlet(K_El90, Q_Plant/(N_SedInletPipes*N_SedTanks), Nu_Water, G_FlocBod[last(G_FlocBod)], EN_PipeSpec) if sedlayout == 1
    ND_SedPipeEntrance ← ND_SedInlet(K_PipeExit, Q_Plant/(N_SedTanks*N_SedInletPipes), Nu_Water, G_FlocMin, EN_PipeSpec) if sedlayout == 3 or 2
    return ND_SedPipeEntrance
