acad_version := 2008
# Engineer Entered Values:
Q_Plant := 3*L/s
# sed tank parameters
# This is a ratio of the portion of the tank that is dedicated to the slanted bottom over the entire waterdepth of the tank. The remainder of the tank will be aportioned to the the lamella and the exit launders.
Pi_BottomHWSed := (70 cm + 4 in)/HW_Sed  # error: This variable is undefined.
W_SedSingle := 92 cm
# width of lamella = width of sed tank
EN_PipeSpec := 4
EN_DrillSeries := 1  # layout of the sed tank, the placement of hte channel and entrance tanks as well as the sed tank distribution system
sedlayout := 2
# floc parameteres
T_FlocBaffle := 2 mm
# Values used to Draw Plant:
T_PlantWall := 15 cm
T_PltWall := 15 cm
T_Ap := T_PltWall
T_Cp := T_Ap
T_EtWall := T_PltWall
T_Mp := 30 cm
T_ChannelWall := 15 cm
W_MpWalkway := 1 m
C_FcmDoseMax := 90*mg/L
C_FcmAlum := 120*gm/L
EN_FcmTube := 0
Ti_StockMin := 30 hr
