# Engineer Entered Values:
Q_Plant := 3*L/s
# sed tank parameters
N_SedTanks := 2
# Number of sedimentation tanks (to ensure currently reasonable dimensions, this might be a factor by which to enlarge the number of sedimentation tanks in the future.)
W_SedBay := 92 cm  # width of lamella = width of sed tank bay
N_SedBaysEst := 1  # Number of bays (slope pairs) in each sedimentation tank
EN_PipeSpec := 4
EN_DrillSeries := 1
# floc parameteres
T_FlocBaffle := 2 mm
# Chem Feed Parameters
C_FcmDoseMax := 90*mg/L
C_FcmAlum := 120*gm/L
EN_FcmTube := 0
Ti_StockMin := 30 hr
# Values used to Draw Plant:
T_PlantWall := 15 cm
W_MpWalkway := 1 m
