# [reference: userinputs.xmcd]
# [reference: DesignAssumptions.xmcd]
# [reference: PipeDatabase.xmcd]
# [reference: Minor loss coefficients.xmcd]
# [reference: FluidsFunctions.xmcd]
# [reference: Sedimentation.xmcd]
# Solution steps
# calculate diameter of rapid mix pipe. All Lfom pipes then take on this value to make connections easier
# Calculate number of riser pipes based on some sort of flow max for a given riser pipe diameter. Currently we are using the notion that an orifice at 20 cm carrying all of the water into the riser pipe must be less than 1/3 the area of the riser pipe.
# Design the orifice pattern for each riser pipe (note that an alternate solution would be to design standard riser pipe designs and then simply pick one of those designs. Thus a 3" pipe might be a 100 L/min Linear Flow Orifice Meter.
# Meet the target flows as closely as possible when the water level is at the bottom of each row of orifices
# Rapid mix pipe diameter
K_Rm := K_sum(0, N_RmEl, 0, N_RmTee, 0, 0, 0, 0, 0)
ND_Lfom := D_pipeschedule(Q_Plant, EN_PipeSpec, HL_RmDesign, L_RmPipe, NU, E_Pvc, K_Rm) = 6 in  # returns nominal pipe size
ID_Lfom := innerdiameter(ND_Lfom, EN_PipeSpec) = 5.501 in  # Returns ID given nomal size
HL_Rm := h_l(Q_Plant, ID_Lfom, L_RmPipe, K_Rm, NU, E_Pvc) = 12.0621 cm
# Number of risers
totalorificearea := A_orifice(HL_Lfom, K_orifice, Q_Plant)
N_Lfom := ceil(Pi_LfomOrificeArea*A_orifice(HL_Lfom, K_orifice, Q_Plant)/A_circle(ID_Lfom)) = 2
## Design Lfom
# Linear Flow Orifice Meter
ramp(start, interval, range) :=
    for i ∈ 0 .. range/interval - 1
        ramp[i] ← start + i*interval
    return ramp
H_ramp(B_LfomOrifice, HL_Lfom, Pi_HLfom) := ramp(B_LfomOrifice*Pi_HLfom, B_LfomOrifice, HL_Lfom)
# locations where we will try to get the target flows is in between orifices at elevation Pi.H
Q_ramp(B_LfomOrifice, HL_Lfom, Pi_HLfom) := H_ramp(B_LfomOrifice, HL_Lfom, Pi_HLfom)/HL_Lfom*Q_Plant/N_Lfom  # Target riser flows
# Calculate the flow for a given number of submerged rows of orifices
Q_LfomActual(RowIndexSubmerged, n_Lfomorifices, B_LfomOrifice, D_Lfomorifice, HL_Lfom, Pi_HLfom) :=
    Q ← 0*L/min
    for i ∈ 0 .. RowIndexSubmerged
        Q ← Q + n_Lfomorifices[i]*Q_orifice(D_Lfomorifice, H_ramp(B_LfomOrifice, HL_Lfom, Pi_HLfom)[RowIndexSubmerged - i], K_orifice)
    return Q
# Calculate number of orifices at each level given a diameter
fN_LfomOrifices(B_LfomOrifice, D_LfomOrifice, HL_Lfom, Pi_HLfom) :=
    Q_ramplocal ← Q_ramp(B_LfomOrifice, HL_Lfom, Pi_HLfom)
    H_ramplocal ← H_ramp(B_LfomOrifice, HL_Lfom, Pi_HLfom)
    n[last(H_ramplocal)] ← 0
    for i ∈ 0 .. last(H_ramplocal)
        n[i] ← max(0, round((Q_ramplocal[i] - Q_LfomActual(i, n, B_LfomOrifice, D_LfomOrifice, HL_Lfom, Pi_HLfom))/Q_orifice(D_LfomOrifice, B_LfomOrifice*Pi_HLfom, K_orifice)))
    return n
D_LfomOrifice :=
    D_LfomOrificelocal ← D_circle(A_orifice(B_LfomOrifice*Pi_HLfom, K_orifice, Q_ramp(B_LfomOrifice, HL_Lfom, Pi_HLfom)[0])/N_LfomOrificesFirstrow)
    i ← 0
    while D_LfomOrificelocal > D_Drill[i]
        i ← i + 1
    D_LfomOrifice ← D_Drill[i] if (D_LfomOrificelocal - D_Drill[i - 1]) > (D_Drill[i] - D_LfomOrificelocal)
    D_LfomOrifice ← D_Drill[i - 1] otherwise
    return D_LfomOrifice
# This selects an orifice size that will put N.LfomOrificesFirstrow holes in the bottom row. I selected this based on the observation that with 5 holes in the bottom row the error was very small. We should reevaluate this algorithm.
Q_ramp(B_LfomOrifice, HL_Lfom, Pi_HLfom)[0] = 21.5 L/min
# rounds to closest drill size
N_LfomOrifices := fN_LfomOrifices(B_LfomOrifice, D_LfomOrifice, HL_Lfom, Pi_HLfom)
j := 0 .. last(N_LfomOrifices)
Q_LfomError[j] := (N_Lfom*(Q_LfomActual(j, N_LfomOrifices, B_LfomOrifice, D_LfomOrifice, HL_Lfom, Pi_HLfom) - Q_ramp(B_LfomOrifice, HL_Lfom, Pi_HLfom)[j])/Q_Plant)
# array of errors
Q_LfomErrorMax := max(|Q_LfomError|) = 1.37663 %
# this function could use some simple sketches uploaded to the wiki to make sure everyone is on the same page about which dimensions we are discussing...
# I have updated the wiki with a sketch for determing the water level and therefore the depth of the grit chamber.
# so are all those connections really inside the grit chamber? I don't really understand how everything is connected?
# Nominal Pipe Size of each riser. This will also be the size of rapid mix pipe.
# I made the mistake in including the connections in the grit chamber in the head loss calculations. You only need to consider the headloss in the rapid mix pipe which results from 3 elbows. I have made this updated to the K.sum inputs.
# Are we sure that they won't want to put the chem strorage drums side by side?
# These are like design assumptions but did not include in the diseign assumptions file to prevent cluttering. This may need to be changed. They make it possible to insert 4 Lfom in the entrance tank.
# so is length really just going to be a design assumption? At some point doesn't the grit chamber design need to account for the capacity we need based on flowrate and what not?
# have the master program send the grit chamber the water level in the sed tank
# I have updated the length based on the new configuration.
N_EtElDim := 2  # The number of elbows needed to calculate the width and length of the grit chamber.
N_EtPipeDim := 2  # The number of pipe diameters needed to calculate the width and length of the grit chamber.
N_EtTeeDim := 1  # The number of tees needed to calculate the width and length of the grit chamber.
# The length of the grit chamber is calculated as the length of the tees and elbows needed for the risers in addition to some extra space (grit extra length) to allow for the riser to be assembled into the grit chamber.
L_Et := N_EtTeeDim*TeeLength(ND_Lfom) + N_EtElDim*ElbowRadius(ND_Lfom) + N_EtPipeDim*ND_Lfom = 1.04775 m
# Need to check to see if these are actually returning the correct dimensions from the pipe database
W_Et :=
    W_Et ← D_Drum + W_ApWalkway if L_Et < D_Drum + W_ApWalkway
    W_Et ← L_Et otherwise
    return W_Et
W_Et = 1.04775 m
# The depth of the grit chamber is calculated starting from the depth of the water in the channel tank plus the headloss through flocculator plus headloss through rapid mix pipe, plus the height of a tee, the height of half an orifice diameter, plus the height of the riser itself
HW_Et := HW_Channel + HL_Floc + HL_Rm + TeeLength(ND_Lfom) + 0.5*D_LfomOrifice + HL_Lfom  # error: This variable is undefined.
HW_Et =  # error: This variable is undefined.
TeeLength(ND_Lfom) = 0.28575 m
H_Et := HW_Et + H_PlantFreeboard = 1.35487 m  # error: This variable is undefined.
# Need to calculate the riser height, but we need to define how pipe lengths are calculated. Do they include the part that is inserted in the socket?
L_Lfom := □  # error: This placeholder is empty.
