# Exit Channel Design
# [reference: UserInputs- 1m deep.xmcd]
# [reference: DesignAssumptions-1m deep.xmcd]
# [reference: MathFunctions.xmcd]
# [reference: PipeDatabase.xmcd]
# [reference: MinorLossCoefficients.xmcd]
# [reference: FluidsFunctions.xmcd]
# [reference: Inlet Channel.xmcd]
# [reference: Sedimentation.xmcd]
# [reference: Sed. Inlet Slopes.xmcd]
# [reference: Launder.xmcd]
L_ExitChannel := N_SedTanks*(W_Sed + T_PlantWall)  # The length is based on the side of the sed tank, this is also the same length of the inlet channel.
# To Calculate the Width of the channel the width of the exit weir needs to be determined.
# The weir equation is used to determine the nominal size for the diameter of the weir (Assumes a circular over flow weir)
D_PltWeirEstimated := (3*Q_Plant/(2*Cd_PltWeir*sqrt(2*g)*π*Pi_PltWeir^(3/2)))^(2/5)
# Using the pipe database file, and given the schedule of the pipe, the actual nominal diameter of the pipe is determined
ND_PltWeir := NominalPipeSize(D_PltWeirEstimated) = 6 in
W_ExitChannel := max(W_InletChannel, outerdiameter(ND_PltWeir))
# The width of the exit channel will either be the same as the width of the inlet channel or as wide as the Outer Diameter of the exit weir.
L_SedLaunder := L_Sed - W_InletChannel - W_ExitChannel - T_ChannelWall  # Using the inner diameter, the actual spacing above the weir is calculated
# The actual weir height is determined using the actual inner diameter of the pipe and the weir equation
ND_SedLaunder := ND_Manifold(Q_Sed, HL_SedLaunderBod, L_SedLaunder, Pi_QLaunderOrifices, EN_PipeSpec, Nu_Water, E_Pvc, K_SedLaunder, N_SedLaunderOrifices) = 4 in
HL_SedLaunderManifold := HL_Manifold(Q_Sed, ND_SedLaunder, L_SedLaunder, 0, Nu_Water, E_Pvc, N_SedLaunderOrifices) = 0.0619082 cm
HL_SedLaunderOrifice := HL_SedLaunderBod - HL_SedLaunderManifold = 0.0993809 m
D_SedLaunderOrifice := RoundNearest(D_circle(A_orifice(HL_SedLaunderOrifice, Pi_VenaContractaOrifice, Q_SedLaunderOrifices)), D_Drill) = 0.354331 in
HL_SedLaunder := HL_SedLaunderBod = 0.1 m
HW_ExitChannel := HW_InletChannel - HL_SedLaunder
H_ExitChannel := H_InletChannel
# The water Height in both channels will be the same.
Del_PltWeirH := (3*Q_Plant/(2*Cd_PltWeir*sqrt(2*g)*π*ND_PltWeir))^(2/3)  # This is the depth of the exit channel.
H_PltWeir := HW_ExitChannel - Del_PltWeirH
