# [reference: FluidsFunctions.xmcd]
# [reference: DesignAssumptions.xmcd]
# [reference: userinputs.xmcd]
## BOD
ID_FcmValveOrifice := 0.093 in
HL_FcmTube := 20 cm
ID_FcmTubeEnglish := [0.0625; 0.125; 0.17; 0.25; 0.3125; 0.375]*in
ID_FcmTubeMetric := [2; 3; 4; 5; 6; 7]*mm
HL_FcmValveMax := 20 cm
Q_Plant := 100*L/min
Re_max := 2100
L_FcmTubeMax := 2 m
# The head loss from the valve becomes excessive about the same time that the
## User
C_FcmDoseMax := 90*mg/L
C_FcmAlum := 120*gm/L
EN_FcmTube := 0
Ti_StockMin := 30 hr
Q_FcmMax := Q_Plant*C_FcmDoseMax/C_FcmAlum = 75 mL/min
Vol_Stock := Q_FcmMax*Ti_StockMin = 135 L
Q_FcmValveMax := Q_pipeminor(ID_FcmValveOrifice, HL_FcmValveMax, 1) = 520.793 mL/min
N_Fcm := ceil(Q_FcmMax/Q_FcmValveMax) = 1
L_FcmTubeMin := HL_FcmTube
# The length of the tube has to be at least as great as the maximum head loss with some additional length to be able to reach the ports
D_available :=
    D ← ID_FcmTubeEnglish if EN_FcmTube == 0
    D ← ID_FcmTubeMetric otherwise
    return D
D_available = [1.5875; 3.175; 4.318; 6.35; 7.9375; 9.525] mm
## Viscosity calculations
Al := 27*gm/mol
S := 32.064*gm/mol
O := 16*gm/mol
H := 1.008*gm/mol
MW_Al2O3 := 2*Al + 3*O
MW_alum := 2*Al + 3*(S + 4*O) + 14.3*(2*H + O)
m_μ := slope([0; 323.433; 423.403; 546.895], [1*10^-3; 1.2*10^-3; 1.3*10^-3; 1.4*10^-3])*m^2/s = 7.25522e-7 m^2/s
b_μ := intercept([0; 323.433; 423.403; 546.895], [1*10^-3; 1.2*10^-3; 1.3*10^-3; 1.4*10^-3])*kg/(m*s) = 0.000990343 kg/(m*s)
μ_Alum(C_FcmAlum) := m_μ*C_FcmAlum + b_μ
ρ_Alum(C_FcmAlum) := 1*gm/cm^3/(-2.308*10^-3*L/gm*MW_Al2O3/MW_alum*C_FcmAlum + 1.012)
ν_Alum(C_FcmAlum) := μ_Alum(C_FcmAlum)/ρ_Alum(C_FcmAlum)
NU_FcmAlum := ν_Alum(C_FcmAlum) = 1.03959e-6 m^2/s
## Tube diameter constraints
# First we write a function that will round up (or down)  to the next available tube size.
forceround(x, xarray, direction) :=
    xarray ← sort(xarray)
    i ← 0
    while x > xarray[i]
        i ← i + 1
    return xarray[i - 1 + direction]  # direction is for rounding up (1) or rounding down (0).
# Calculate the number of modules based on three constraints (maximum laminar flow through a reasonable length tube and maximum head loss through the float valve and available tube diameters)
# Then given the flow per module calculate the optimal ID and tube length.
# This is the maximum flow that can be sent through the alum feeder without requiring extremely long tubes. It is based on eliminating diameter from the Hagen-Poiseuille equation by using the maximum Reynolds number constraint. For higher flows multiple parallel tubes could be used. However the maximum flow rate that can be handled by the float valve needs to be considered.
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Q_FcmMaxLaminar := (L_FcmTubeMax*Re_max^4*π^3*NU_FcmAlum^5/(2*g*HL_FcmTube))^(1/3)
Q_FcmMaxLaminar = 432.03 mL/min  # given continuously variable diameters!
# Now add constraint of maximum diameter that will give desired max head loss with reasonable length of tubing
D_max := (L_FcmTubeMax*(128*NU_FcmAlum*Q_FcmMaxLaminar)/(HL_FcmTube*g*π))^(1/4) = 4.19944 mm
# Add constraint of available tubing
D_maxforlongtube := forceround(D_max, D_available, 0) = 3.175 mm
# Recalculate maximum laminar flow given actual tubing diameter
Q_FcmMaxLaminar := π*NU_FcmAlum*Re_max*D_maxforlongtube/4 = 326.638 mL/min
N_FcmTube := ceil(Q_FcmMax/Q_FcmMaxLaminar) = 1
N_Fcm := max(N_Fcm, N_FcmTube) = 1
Q_FcmTubeMax := Q_FcmMax/N_Fcm = 75 mL/min
HL_FcmValve := h_e(Q_FcmTubeMax, ID_FcmValveOrifice, 1) = 0.414785 cm  # head loss through the float valve
# Minimum diameter required to get laminar flow at max flow based on Reynolds number for transition to turbulence
D_minlaminar := 4*Q_FcmTubeMax/(π*NU_FcmAlum*Re_max) = 0.729018 mm
# Minimum diameter of tubing to produce the desired head loss at the maximum flow using the minimum feasible length of tubing. Based on the Hagen-Poiseuille equation.
D_minheadloss := (128*NU_FcmAlum*Q_FcmTubeMax*L_FcmTubeMin/(HL_FcmTube*g*π))^(1/4) = 1.52433 mm
# The minimum diameter is the maximum of the diameter calculated by the previous two equations. A larger diameter could be used if a longer tube is used.
D_min := max(D_minheadloss, D_minlaminar) = 1.52433 mm
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# Now we use the forceround function to find the design tube diameter based on the minimum tube diameter and the available tube diameters.
ID_FcmTube := forceround(D_min, D_available, 1) = 1.5875 mm
# Length of tube required to get desired head loss at maximum flow based on the Hagen-Poiseuille equation.
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L_FcmTube := HL_FcmTube*g*π*ID_FcmTube^4/(128*NU_FcmAlum*Q_FcmTubeMax)
N_Fcm = 1
ID_FcmTube = 1.5875 mm
ID_FcmTube = 0.0625 in
L_FcmTube = 23.5273 cm
Q_FcmTubeMax = 75 mL/min
HL_FcmValve = 0.414785 cm
