# [reference: UserInputs- 1m deep.xmcd]
# [reference: DesignAssumptions-1m deep.xmcd]
# [reference: MathFunctions.xmcd]
# [reference: PipeDatabase.xmcd]
# [reference: MinorLossCoefficients.xmcd]
# [reference: FluidsFunctions.xmcd]
# [reference: Inlet Channel.xmcd]
# [reference: Sedimentation.xmcd]
# [reference: SludgeDrain.xmcd]
# [reference: Sed. Inlet Slopes.xmcd]
# [reference: Launder.xmcd]
# [reference: Exit Channel.xmcd]
# [reference: FCM.xmcd]
# Flocculation Function
# References:
# Requires the following as inputs:
# UserInputs
# DesignAssumptions
# PipeDatabase
# MinorLossCoefficients
# FluidsFunctions
# Channel
# Sedimentation
# Rapid Mix Values Needed For Floc Calculations:
K_Rm := K_Sum(0, N_RmEl, 0, N_RmTee, 0, 0, 0, 0, 0) = 0
# Need these calculations from RapidMix design to get the size of the elbow located at the entrance to the floc tank
ND_Lfom := D_pipeschedule(Q_Plant, EN_PipeSpec, HL_Lfom, L_RmPipe, Nu_Water, E_Pvc, K_Rm) = 2 in
# The length of one channel of the flocculator is equal to the length of a sed tank . Therefore the total length is equal to the number of channels times the length of a sed tank. The width of a flocculator is equal to the width of a sed tank divided by the number of channels (to make "upward velocity" equal in the two tanks. The water depth at the end of the flocculaor must be the same as the water depth in the sed tank.
# Floc Calculations:
W_FlocChannel := W_Sed/2 = 0.5334 m
Q_FlocMax := W_FlocChannel*(HW_Sed/(2*Pi_FlocBaffle))^(4/3)*G_FlocBod[last(G_FlocBod)]^(2/3)*(2*Nu_Water*Pi_FlocDissipation/K_FlocBaffle180)^(1/3) = 827.406 L/min
# This is the maximum flow rate that can be accomodated with this width and depth of channel. If the flow rate is greater than this value there will be short circuiting in the flocculator. This should somehow be implemented as a check in LabVIEW to guide the designer in setting the plant dimensions. Or maybe we need to develop an algorithm to set the channel width.
S_FlocBaffle := (1/G_FlocBod)^(1/2)*(K_FlocBaffle180*Q_Plant^3/(2*Pi_FlocDissipation*Nu_Water*W_FlocChannel^3))^(1/4) = [6.69468; 8.21572; 13.6655; 33.4734] cm
# calculates the baffle spacing based on desired G value
B_FlocBaffle := S_FlocBaffle + T_FlocBaffle = [6.89468; 8.41572; 13.8655; 33.6734] cm
# B.FlocBaffle is measured from center to center and thus includes the thickness of the baffle.
# Calculates the Gθ per baffle under low flow conditions
Gt_FlocBaffleMin := sqrt(Pi_FlocDissipation*Pi_QPlant*Q_Plant*K_FlocBaffle180/(2*Nu_Water*W_FlocChannel)) = 133.455
# Total number of baffles required to get the minimum Gθ.
N_FlocBafflesMin := ceil(Gt_FlocBod/Gt_FlocBaffleMin) = 38
N_FlocBaffleSection :=
    for i ∈ 0 .. last(G_FlocBod) - 1
        N[i] ← floor(N_FlocBafflesMin/length(G_FlocBod))
    N[last(G_FlocBod)] ← N_FlocBafflesMin - sum(N)
    return N
    = [9; 9; 9; 11]
# Calculates the number of baffles in each section
# Length of The Floc Tank needed to fit all the baffles
L_FlocTankEst := sum(vectorize(N_FlocBaffleSection*B_FlocBaffle)) + W_FlocChannel = 6.8633 m
# The number of channels in the flocculator
N_FlocChannels := ceil(L_FlocTankEst/L_Sed) = 2
L_FlocTank := N_FlocChannels*L_Sed = 7.37781 m  # Actual Length of the Floc Tank given each channel is the length of one sed tank.
V_Floc := Q_Plant/(W_FlocChannel*S_FlocBaffle) = [0.177357; 0.144522; 0.0868871; 0.0354715] m/s
# Not used, but for interest, here are the velocities at max flow
HL_FlocBaffle := h_erect(Q_Plant, W_FlocChannel, S_FlocBaffle, K_FlocBaffle180) = [0.481138; 0.319476; 0.115473; 0.0192455] cm
# calculates the head loss per baffle and then finds the total headloss
# This head loss calculation is based on the ideal design that doesn't yet account for how the baffles are actually placed in the channels. The error will be small since it is the last section of baffle spacings that might have a different number of baffles
HL_Floc := sum(vectorize(N_FlocBaffleSection*HL_FlocBaffle)) = 8.45648 cm
# Calculate the water level at the entrance to the floc tank
HW_FlocStart := HW_Sed + HL_Floc = 1.28456 m
# G at the port is based on the G at the end of the flocculator because the low G region of the flocculator is so long.
W_FlocPort := S_FlocBaffle[last(G_FlocBod)] = 0.334734 m
H_FlocPort := W_FlocChannel*S_FlocBaffle[last(G_FlocBod)]*Pi_FlocBaffle/W_FlocPort = 0.5334 m
# Now we need to assign positions, lengths and elevations to floc baffles
L_FlocBaffleLower := HW_Sed - S_FlocBaffle*Pi_FlocBaffle = [1.13305; 1.11784; 1.06335; 0.865266] m
L_FlocBaffleUpper := HW_FlocStart + H_PlantFreeboard - S_FlocBaffle*Pi_FlocBaffle = [1.31762; 1.30241; 1.24791; 1.04983] m
# First baffle is a lower baffle because rapid mix pipe enters low
# Ideally have odd number of baffles in first channel (enter low, exit low)
# Ideally have even number of baffles in 2nd channel (enter low, exit high), but I haven't done any coding to get the right number of baffles (odd or even). The fit of the baffles could potentially be improved by
Loc_FlocBaffles :=
    X[0, N_FlocChannels - 1] ← 0 m
    L[0, N_FlocChannels - 1] ← 0 m
    Z[0, N_FlocChannels - 1] ← 0 m
    section ← 0
    BafflesInSection ← 0
    X[0, 0] ← ElbowRadius(ND_Lfom)
    for Channel ∈ 0 .. N_FlocChannels - 1
        i ← 0
        X_FirstBaffleInChannel ← ElbowRadius(ND_Lfom) if Channel == 0
        X_FirstBaffleInChannel ← W_FlocPort + S_FlocPort otherwise
        X[i, Channel] ← X_FirstBaffleInChannel
        L[i, Channel] ← L_FlocBaffleLower[section]
        Z[i, Channel] ← 0 m
        X_LastBaffleInChannel ← L_Sed - (W_InletChannel + S_FlocPort) if Channel == N_FlocChannels - 1
        X_LastBaffleInChannel ← L_Sed - (W_FlocPort + S_FlocPort) otherwise
        while X[i, Channel] + B_FlocBaffle[section] < X_LastBaffleInChannel
            i ← i + 1
            BafflesInSection ← BafflesInSection + 1
            if BafflesInSection == N_FlocBaffleSection[section] and section < last(G_FlocBod)
                section ← section + 1
                BafflesInSection ← 1
            X[i, Channel] ← X[i - 1, Channel] + B_FlocBaffle[section]
            if mod(i, 2) == 1
                L[i, Channel] ← L_FlocBaffleUpper[section]
                Z[i, Channel] ← S_FlocBaffle[section]*Pi_FlocBaffle
            otherwise
                L[i, Channel] ← L_FlocBaffleLower[section]
                Z[i, Channel] ← 0 m
        for k ∈ 0 .. last(X[:, 0])
            X[k, Channel] ← L_Sed - X[k, Channel] if mod(Channel, 2) == 1 and X[k, Channel] ≠ 0
    return [X, L, Z]
# section is index of the spacing of baffles
# First baffle is away from wall to allow elbow to deflect water downward
# This code works with any number of flocculator channels
# i is the number of baffles in a channel
# Each channel starts with a lower baffle
# Move to the next spacing if baffles in section equals target number of baffles in section and if the section isn't the last section
# Mod handles the odd and even baffles
# Reverse the direction of odd numbered channels
X_FlocBaffles := Loc_FlocBaffles[0, 0]
L_FlocBaffles := Loc_FlocBaffles[0, 1]
Z_FlocBaffles := Loc_FlocBaffles[0, 2]
N_FlocBaffles :=
    N ← 0
    i ← 0
    Channel ← 0
    for Channel ∈ 0 .. N_FlocChannels - 1
        for i ∈ 0 .. last(X_FlocBaffles[:, 0])
            N ← N + 1 if X_FlocBaffles[i, Channel] ≠ 0 m
    return N
Gt_FlocMinFlow := N_FlocBaffles*Gt_FlocBaffleMin = 4804.38
