# Fluids Functions
# Reynolds Number
Re_pipetransition := 2100
R_h(w, b) := w*b/(2*(w + b))
Re(Q, D, ν) := 4*Q/(π*D*ν)
Re_rect(Q, w, b, ν) := 4*Q*R_h(w, b)/(w*b*ν)
# Friction Coefficient
f_rect(Q, w, b, ν, ε) :=
    f ← 0.25/log(ε/(3.7*4*R_h(w, b)) + 5.74/Re_rect(Q, w, b, ν)^0.9)^2 if Re_rect(Q, w, b, ν) > Re_pipetransition
    f ← 64/Re_rect(Q, w, b, ν) otherwise
    return f
f(Q, D, ν, ε) :=
    f ← 0.25/log(ε/(3.7*D) + 5.74/Re(Q, D, ν)^0.9)^2 if Re(Q, D, ν) > Re_pipetransition
    f ← 64/Re(Q, D, ν) otherwise
    return f
# Headloss Calculations
# This is head loss due to major losses (caused by shear).
h_frect(Q, w, b, L, ν, ε) := f_rect(Q, w, b, ν, ε)*L/(4*R_h(w, b))*Q^2/(2*g*(w*b)^2)
h_f(Q, D, L, ν, ε) := f(Q, D, ν, ε)*8/(g*π^2)*L*Q^2/D^5
# This is head loss due to minor losses (caused by flow expansions).
h_erect(Q, w, b, K) := K*Q^2/(2*g*(w*b)^2)
h_e(Q, D, K) := K*8/(g*π^2)*Q^2/D^4
# This is total head loss due to major and minor losses
h_lrect(Q, w, b, L, K, ν, ε) := h_erect(Q, w, b, K) + h_frect(Q, w, b, L, ν, ε)
h_l(Q, D, L, K, ν, ε) := h_e(Q, D, K) + h_f(Q, D, L, ν, ε)
# Headloss not multiplied by v^2/(2*g)
C_p(Q, D, L, K, ν, ε) := f(Q, D, ν, ε)*L/D + K
# This is total head loss through the manifold
h_lmanifold(Q, D, L, K, ν, ε, n) := h_l(Q, D, L, K, ν, ε)*(1/3 + 1/(2*n) + 1/(6*n^2))
# Orifice Equations
A_circle(D_circle) := π*D_circle^2/4
D_circle(A_circle) := sqrt(4*A_circle/π)
Q_orifice(D, h, K_orifice) := K_orifice*A_circle(D)*sqrt(2*g*h)
h_orifice(D, K_orifice, Q) := (Q/(K_orifice*A_circle(D)))^2*1/(2*g)
A_orifice(h, K_orifice, Q) := Q/(K_orifice*sqrt(2*g*h))
n_orifices(Q_plant, K_orifice, Δh_orifice, D_orifice) := ceil(A_orifice(Δh_orifice, K_orifice, Q_plant)/A_circle(D_orifice))
# Flow Equations
Q_transition(D, ν) := π*D*Re_pipetransition*ν/4
# Hagen-Poiseuille
Q_hagen(D, h_f, L, ν) := π*D^4/(128*ν)*g*h_f/L
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Q_SJ(D, h_f, L, ν, ε) := -π/sqrt(2)*D^(5/2)*sqrt(g*h_f/L)*log(ε/(3.7*D) + 2.51*ν*sqrt(L/(2*g*h_f*D^3)))
Q_pipemajor(D, h_f, L, ν, ε) :=
    Q_hagen(D, h_f, L, ν) if Q_hagen(D, h_f, L, ν) < Q_transition(D, ν)
    Q_SJ(D, h_f, L, ν, ε) otherwise  # This function calculates the flow through a pipe under either laminar or turbulent flow when there are only major losses
Q_pipeminor(D, h_e, K) := A_circle(D)*sqrt(2*g*h_e/K)
# This function uses iteration to calculate the flow through a pipe system. It works for laminar or turbulent flow.
Q_pipetotal(D, h_l, L, ν, ε, K) :=
    Q_temp ← 0*m^3/s
    error ← 1
    Q_tempprev ← min(Q_pipemajor(D, h_l, L, ν, ε), Q_pipeminor(D, h_l, K))
    while error > 0.01
        (Q_temp ← Q_tempprev)
        h_fnew ← h_l*h_f(Q_temp, D, L, ν, ε)/(h_f(Q_temp, D, L, ν, ε) + h_e(Q_temp, D, K))
        Q_tempprev ← Q_pipemajor(D, h_fnew, L, ν, ε)
        error ← 0 if Q_tempprev == 0*m^3/s
        error ← |Q_temp - Q_tempprev|/mean(Q_temp, Q_tempprev) otherwise
    return Q_tempprev
# get a better estimate of the major losses. Adjust it by the ratio of the actual head loss to the calculated total head loss
# Pipe Equations
D_pipe(Q, D_available, h_l, L, ν, ε, K) :=
    i ← 0
    while Q > Q_pipetotal(D_available[i], h_l, L, ν, ε, K)
        i ← i + 1
    return D_available[i]
Dnextlargest(D, D_available) :=
    i ← 0
    while D_available[i] < D
        i ← i + 1
        break if i == last(D_available)
    return D_available[i]
Dpipelarger(D, D_available) :=
    i ← 0
    while D_available[i] ≤ D
        i ← i + 1
        break if i == last(D_available)
    return D_available[i + 1]
D_manifold(Q, h, L, Q_ratio, D_available, ν, ε, K, n) :=
    D_new ← D_available[0]
    D_old ← 0 in
    error ← 1
    while error > 0.01
        D_old ← D_new
        D_new ← (8*Q^2/(g*π^2*h)*(1 + (f(Q, D_old, ν, ε)*L/D_old + K)*(1/3 + 1/(2*n) + 1/(6*n^2)))/(1 - Q_ratio^2))^(1/4)
        error ← |D_old - D_new|/mean(D_old, D_new)
    D_new ← Dnextlargest(D_new, D_available)
    return D_new
D_orifices(h_losslaunder, Q_plant, D_launder, n_orifices, HW_sedtank, K_orifice) := D_circle(A_orifice(HW_sedtank - h_losslaunder - Q_plant^2/(2*g*A_circle(D_launder)^2), K_orifice, Q_plant/n_orifices))
# Weir Headloss
# Monroe changed the coefficient from 0.81 to 0.61
Headloss_weir(Q, D) := (Q/D)^(2/3)*((3/2)/(0.61*π*(2*g)^0.5))^(2/3)
