# AguaClara Water Treatment Plants
# Automated Design
# User Inputs:
HW_Sed := 3.05 m
# Design References
# [reference: UserInputs- test2W.xmcd]
# [reference: DesignAssumptions-test 2W.xmcd]
sedlayout := 3
# [reference: MathFunctions.xmcd]
# [reference: PipeDatabase.xmcd]
# [reference: MinorLossCoefficients.xmcd]
# [reference: FluidsFunctions.xmcd]
# Inlet Channel:
N_SedInletPipes := 2
N_SedTanks := 3
# [reference: Inlet Channel-gracias 2W test.xmcd]
W_InletChannel = 0.680915 m
L_Channel = 6.927 m
ND_SedPipeEntrance = 24 in
N_SedInletPipes = 2
H_InletChannel = 1.20405 m
Q_Plant = 800 gal/min
# Sedimentation Tanks:
# [reference: Sedimentation-gracias 2W test.xmcd]
N_SedTanks = 3
H_SedBelowSlope = 2.06009 m
H_SedBelowStraight = 0.0762 m
H_SedBetween = 0.0762 m
HW_Sed = 3.05 m
H_Sed = 3.15 m
H_SedBelow = 2.13629 m
L_Sed = 9.6182 m
ND_SedPipeEntrance = 24 in
# Sedimentation Tank Sludge Drain:
# [reference: SludgeDrain.xmcd]
N_SedSludgeOrifices = 96
ND_SedSludge = 6 in
Q_SludgeDrainInitial = 4222.36 L/min
D_SedSludgeOrifice = 0.25 in
# Sedimentation Tank Inlet Slopes:
# [reference: Sed. Inlet Slopes.xmcd]
B_SedInlet = 6.395 cm
H_SedInlet = 8.34807 cm
AN_SedTopInlet = 60 deg
AN_SedBottom = 10 deg
L_SedTopInlet = 2.159 m
A_SedInlet = 9064.58 cm^2
H_SedTopInlet = 186.975 cm
H_SedInletSlopes = 1.96975 m
H_SedBottom = 0.190345 m
# Sedimentation Tank Effluent Launder:
# [reference: Launder.xmcd]
N_SedLaunderOrifices = 162
Q_SedLaunderOrifices = 3.11557 L/min
# Exit Channel:
# [reference: Exit Channel.xmcd]
W_ExitChannel = 0.680915 m
ND_SedLaunder = 8 in
H_ExitChannel = 1.20405 m
L_SedLaunder = 8.10637 m
L_ExitChannel = 6.927 m
D_SedLaunderOrifice = 0.4375 in
H_PltWeir = 0.969082 m
Z_SedLaunder = 2.90046 m
HW_ExitChannel = 1.06405 m
# Lamella:
# [reference: Lamella.xmcd]
L_SedPlate = 0.948213 m
B_SedPlate = 5.09596 cm
S_SedPlate = 4.79596 cm
N_SedPlates = 129
AN_SedPlate = 60 deg
V_SedC = 10.0091 m/day
V_SedUp = 70 m/day
H_SedPlate = 0.821176 m
H_SedAbove = 0.259075 m
# Flow Controller:
# [reference: FCM.xmcd]
N_Fcm = 6
ID_FcmTube = 4.318 mm
ID_FcmTube = 0.17 in
L_FcmTube = 255.151 cm
Q_FcmTubeMax = 378.541 mL/min
HL_FcmValve = 26.6223 cm
# Flocculator:
# [reference: Flocculation.xmcd]
W_FlocChannel = 1.0795 m
S_FlocBaffle = [0.229659; 0.274731; 0.364221; 0.935701] m
B_FlocBaffle = [0.233659; 0.278731; 0.368221; 0.939701] m
N_FlocBafflesMin = 27
X_FlocBaffles = [
    1.2295, 8.6675;
    1.46316, 7.72779;
    1.69682, 6.78809;
    1.93048, 5.84839;
    2.16414, 4.90869;
    2.39779, 3.96899;
    2.67653, 3.02929;
    2.95526, 2.08959;
    3.23399, 1.14989;
    3.51272, 0;
    3.79145, 0;
    4.15967, 0;
    4.52789, 0;
    4.89611, 0;
    5.26434, 0;
    5.63256, 0;
    6.57226, 0;
    7.51196, 0;
    8.45166, 0
] m
HL_Floc = 8.31788 cm
HW_FlocStart = 3.13318 m
W_FlocPort = 0.935701 m
L_FlocBaffles = [
    2.82034, 2.1143;
    2.92034, 2.2143;
    2.82034, 2.1143;
    2.92034, 2.2143;
    2.82034, 2.1143;
    2.92034, 2.2143;
    2.77527, 2.1143;
    2.87527, 2.2143;
    2.77527, 2.1143;
    2.87527, 0;
    2.77527, 0;
    2.78578, 0;
    2.68578, 0;
    2.78578, 0;
    2.68578, 0;
    2.78578, 0;
    2.1143, 0;
    2.2143, 0;
    2.1143, 0
] m
H_FlocPort = 1.0795 m
N_FlocBaffles = 28
Z_FlocBaffles = [
    0, 0;
    0.229659, 0.935701;
    0, 0;
    0.229659, 0.935701;
    0, 0;
    0.229659, 0.935701;
    0, 0;
    0.274731, 0.935701;
    0, 0;
    0.274731, 0;
    0, 0;
    0.364221, 0;
    0, 0;
    0.364221, 0;
    0, 0;
    0.364221, 0;
    0, 0;
    0.935701, 0;
    0, 0
] m
Gt_FlocMinFlow = 7415.12
N_FlocChannels = 2
# Entrance Tank:
# [reference: EntranceTank.xmcd]
ND_Lfom = 20 in
HL_Rm = 0.890191 cm
N_Lfom = 1
D_LfomOrifices = 52.3875 mm
Q_LfomErrorMax = 0.74575 %
N_LfomOrifices = [5; 4; 3; 2; 2; 2; 1; 2; 1; 1]
L_Et = 1.0795 m
W_Et = 1.0795 m
HW_EtMin = 0.2 m
HW_EtMax = 0.4 m
H_Et = 0.5 m
ZW_Et = 3.38318 m
# Any additional needed elevations should be calculated in the files above.
# AutoCAD References
# [reference: basics.xmcd]
# [reference: pipe.xmcd]
# [reference: tank.xmcd]
# [reference: lamina.xmcd]
# [reference: cross.xmcd]
# [reference: Tee.xmcd]
# [reference: elbow.xmcd]
# [reference: Sludge.xmcd]
# [reference: Channel.xmcd]
# [reference: Manifold.xmcd]
# [reference: SedTankslopes.xmcd]
# [reference: Sed Tank Inlet Slope.xmcd]
# [reference: chemicalstock.xmcd]
# [reference: Sedimentation Tank.xmcd]
# [component: inputs SedTank]
# [reference: Flocculation Tank.xmcd]
# [component: inputs FlocTank]
# [reference: Entrance Tank.xmcd]
# [component: inputs EntranceTank]
