# AguaClara Water Treatment Plants
# Automated Design
# User Inputs:
HW_Sed := 3.35 m
# Design References
# [reference: UserInputs- test2W.xmcd]
# [reference: DesignAssumptions-test 2W.xmcd]
# [reference: MathFunctions.xmcd]
# [reference: PipeDatabase.xmcd]
# [reference: MinorLossCoefficients.xmcd]
# [reference: FluidsFunctions.xmcd]
# Inlet Channel:
N_SedTanks := 6
N_SedInletPipes := 2
sedlayout := 3
# [reference: Inlet Channel-gracias 2W test.xmcd]
W_InletChannel = 0.568588 m
L_Channel = 13.854 m
ND_SedPipeEntrance = 20 in
N_SedInletPipes = 2
H_InletChannel = 1.50405 m
Q_Plant = 800 gal/min
# Sedimentation Tanks:
# [reference: Sedimentation-gracias 2W test.xmcd]
N_SedTanks = 6
H_SedBelowSlope = 2.06009 m
H_SedBelowStraight = 0.0762 m
H_SedBetween = 0.0762 m
HW_Sed = 3.35 m
H_Sed = 3.45 m
H_SedBelow = 2.13629 m
L_Sed = 4.8091 m
ND_SedPipeEntrance = 20 in
# Sedimentation Tank Sludge Drain:
# [reference: SludgeDrain.xmcd]
N_SedSludgeOrifices = 48
ND_SedSludge = 4 in
Q_SludgeDrainInitial = 2318.84 L/min
D_SedSludgeOrifice = 0.25 in
# Sedimentation Tank Inlet Slopes:
# [reference: Sed. Inlet Slopes.xmcd]
B_SedInlet = 6.395 cm
H_SedInlet = 8.34807 cm
AN_SedTopInlet = 60 deg
AN_SedBottom = 10 deg
L_SedTopInlet = 2.159 m
A_SedInlet = 9064.58 cm^2
H_SedTopInlet = 186.975 cm
H_SedInletSlopes = 1.96975 m
H_SedBottom = 0.190345 m
# Sedimentation Tank Effluent Launder:
# [reference: Launder.xmcd]
N_SedLaunderOrifices = 70
Q_SedLaunderOrifices = 3.60515 L/min
# Exit Channel:
# [reference: Exit Channel.xmcd]
W_ExitChannel = 0.568588 m
ND_SedLaunder = 6 in
H_ExitChannel = 1.50405 m
L_SedLaunder = 3.52192 m
L_ExitChannel = 13.854 m
D_SedLaunderOrifice = 0.4375 in
H_PltWeir = 1.26908 m
Z_SedLaunder = 3.22586 m
HW_ExitChannel = 1.36405 m
# Lamella:
# [reference: Lamella.xmcd]
L_SedPlate = 1.35328 m
B_SedPlate = 5.07394 cm
S_SedPlate = 4.77394 cm
N_SedPlates = 48
AN_SedPlate = 60 deg
V_SedC = 10.0273 m/day
V_SedUp = 70 m/day
H_SedPlate = 1.17198 m
H_SedAbove = 0.208275 m
# Flow Controller:
# [reference: FCM.xmcd]
N_Fcm = 6
ID_FcmTube = 4.318 mm
ID_FcmTube = 0.17 in
L_FcmTube = 255.151 cm
Q_FcmTubeMax = 378.541 mL/min
HL_FcmValve = 26.6223 cm
# Flocculator:
# [reference: Flocculation.xmcd]
W_FlocChannel = 1.0795 m
S_FlocBaffle = [0.229659; 0.274731; 0.364221; 0.935701] m
B_FlocBaffle = [0.233659; 0.278731; 0.368221; 0.939701] m
N_FlocBafflesMin = 27
HL_Floc = 8.31788 cm
X_FlocBaffles = [
    1.2295, 3.8584, 0.950701, 3.8584;
    1.46316, 3.49018, 1.8904, 2.9187;
    1.69682, 3.12195, 2.8301, 1.97899;
    1.93048, 2.75373, 3.76981, 1.03929;
    2.16414, 2.38551, 0, 0;
    2.39779, 2.01729, 0, 0;
    2.67653, 1.07759, 0, 0;
    2.95526, 0, 0, 0;
    3.23399, 0, 0, 0;
    3.51272, 0, 0, 0;
    3.79145, 0, 0, 0
] m
HW_FlocStart = 3.43318 m
W_FlocPort = 0.935701 m
L_FlocBaffles = [
    3.12034, 3.07527, 2.4143, 2.4143;
    3.22034, 3.08578, 2.5143, 2.5143;
    3.12034, 2.98578, 2.4143, 2.4143;
    3.22034, 3.08578, 2.5143, 2.5143;
    3.12034, 2.98578, 0, 0;
    3.22034, 3.08578, 0, 0;
    3.07527, 2.4143, 0, 0;
    3.17527, 0, 0, 0;
    3.07527, 0, 0, 0;
    3.17527, 0, 0, 0;
    3.07527, 0, 0, 0
] m
H_FlocPort = 1.0795 m
N_FlocBaffles = 26
Z_FlocBaffles = [
    0, 0, 0, 0;
    0.229659, 0.364221, 0.935701, 0.935701;
    0, 0, 0, 0;
    0.229659, 0.364221, 0.935701, 0.935701;
    0, 0, 0, 0;
    0.229659, 0.364221, 0, 0;
    0, 0, 0, 0;
    0.274731, 0, 0, 0;
    0, 0, 0, 0;
    0.274731, 0, 0, 0;
    0, 0, 0, 0
] m
Gt_FlocMinFlow = 6885.47
N_FlocChannels = 4
# Entrance Tank:
# [reference: EntranceTank.xmcd]
ND_Lfom = 20 in
HL_Rm = 0.890191 cm
N_Lfom = 1
D_LfomOrifices = 52.3875 mm
Q_LfomErrorMax = 0.74575 %
N_LfomOrifices = [5; 4; 3; 2; 2; 2; 1; 2; 1; 1]
L_Et = 1.0795 m
W_Et = 1.0795 m
HW_EtMin = 0.2 m
HW_EtMax = 0.4 m
H_Et = 0.5 m
ZW_Et = 3.68318 m
# Any additional needed elevations should be calculated in the files above.
# AutoCAD References
# [reference: basics.xmcd]
# [reference: pipe.xmcd]
# [reference: tank.xmcd]
# [reference: lamina.xmcd]
# [reference: cross.xmcd]
# [reference: Tee.xmcd]
# [reference: elbow.xmcd]
# [reference: Sludge.xmcd]
# [reference: Channel.xmcd]
# [reference: Manifold.xmcd]
# [reference: SedTankslopes.xmcd]
# [reference: Sed Tank Inlet Slope.xmcd]
# [reference: chemicalstock.xmcd]
# [reference: Sedimentation Tank.xmcd]
# [component: inputs SedTank]
# [reference: Flocculation Tank.xmcd]
# [component: inputs FlocTank]
# [reference: Entrance Tank.xmcd]
# [component: inputs EntranceTank]
