# AguaClara Water Treatment Plants
# Automated Design
# User Inputs:
HW_Sed := 2.2 m
# Design References
# [reference: UserInputs- Gracias 1W test.xmcd]
# [reference: DesignAssumptions-test.xmcd]
# [reference: MathFunctions.xmcd]
# [reference: PipeDatabase.xmcd]
# [reference: MinorLossCoefficients.xmcd]
# [reference: FluidsFunctions.xmcd]
# Inlet Channel:
N_SedTanks := 10
N_SedInletPipes := 4
# [reference: Inlet Channel.xmcd]
W_InletChannel = 0.644123 m
L_Channel = 12.295 m
ND_SedPipeEntrance = 12 in
N_SedInletPipes = 4
H_InletChannel = 1.28893 m
Q_Plant = 800 gal/min
# Sedimentation Tanks:
# [reference: Sedimentation-gracias 1W test.xmcd]
N_SedTanks = 10
H_SedBelowSlope = 1.03005 m
H_SedBelowStraight = 0.0762 m
H_SedBetween = 0.0762 m
HW_Sed = 2.2 m
H_Sed = 2.3 m
H_SedBelow = 1.10625 m
L_Sed = 5.77092 m
ND_SedPipeEntrance = 12 in
# Sedimentation Tank Sludge Drain:
# [reference: SludgeDrain.xmcd]
N_SedSludgeOrifices = 57
ND_SedSludge = 3 in
Q_SludgeDrainInitial = 913.69 L/min
D_SedSludgeOrifice = 0.1875 in
# Sedimentation Tank Inlet Slopes:
# [reference: Sed. Inlet Slopes.xmcd]
B_SedInlet = 3.80249 cm
H_SedInlet = 4.96379 cm
AN_SedTopInlet = 60 deg
AN_SedBottom = 10 deg
L_SedTopInlet = 1.0795 m
A_SedInlet = 2266.15 cm^2
H_SedTopInlet = 93.4874 cm
H_SedInletSlopes = 1.03487 m
H_SedBottom = 0.0951725 m
# Sedimentation Tank Effluent Launder:
# [reference: Launder.xmcd]
N_SedLaunderOrifices = 86
Q_SedLaunderOrifices = 1.76066 L/min
# Exit Channel:
# [reference: Exit Channel.xmcd]
W_ExitChannel = 0.644123 m
ND_SedLaunder = 4 in
H_ExitChannel = 1.28893 m
L_SedLaunder = 4.33267 m
L_ExitChannel = 12.295 m
D_SedLaunderOrifice = 0.3125 in
H_PltWeir = 1.05396 m
Z_SedLaunder = 2.10285 m
HW_ExitChannel = 1.14893 m
# Lamella:
# [reference: Lamella.xmcd]
L_SedPlate = 1.1672 m
B_SedPlate = 4.91399 cm
S_SedPlate = 4.61399 cm
N_SedPlates = 65
AN_SedPlate = 60 deg
V_SedC = 10.0161 m/day
V_SedUp = 70 m/day
H_SedPlate = 1.01083 m
H_SedAbove = 0.1543 m
# Flow Controller:
# [reference: FCM.xmcd]
N_Fcm = 6
ID_FcmTube = 4.318 mm
ID_FcmTube = 0.17 in
L_FcmTube = 255.151 cm
Q_FcmTubeMax = 378.541 mL/min
HL_FcmValve = 26.6223 cm
# Flocculator:
# [reference: Flocculation.xmcd]
W_FlocChannel = 0.53975 m
S_FlocBaffle = [0.386239; 0.462041; 0.612545; 1.57366] m
B_FlocBaffle = [0.390239; 0.466041; 0.616545; 1.57766] m
N_FlocBafflesMin = 19
HL_Floc = 7.89618 cm
X_FlocBaffles = [
    0.68975, 4.18226, 1.58866, 4.18226;
    1.07999, 3.56572, 3.16631, 2.60461;
    1.47023, 2.94917, 0, 1.02695;
    1.86047, 1.37152, 0, 0;
    2.32651, 0, 0, 0;
    2.79255, 0, 0, 0;
    3.25859, 0, 0, 0;
    3.87513, 0, 0, 0
] m
HW_FlocStart = 2.27896 m
W_FlocPort = 1.57366 m
L_FlocBaffles = [
    1.81376, 1.58746, 0.626344, 0.626344;
    1.91376, 1.68746, 0.726344, 0.726344;
    1.81376, 1.58746, 0, 0.626344;
    1.91376, 0.726344, 0, 0;
    1.73796, 0, 0, 0;
    1.83796, 0, 0, 0;
    1.73796, 0, 0, 0;
    1.68746, 0, 0, 0
] m
H_FlocPort = 0.53975 m
N_FlocBaffles = 17
Z_FlocBaffles = [
    0, 0, 0, 0;
    0.386239, 0.612545, 1.57366, 1.57366;
    0, 0, 0, 0;
    0.386239, 1.57366, 0, 0;
    0, 0, 0, 0;
    0.462041, 0, 0, 0;
    0, 0, 0, 0;
    0.612545, 0, 0, 0
] m
Gt_FlocMinFlow = 6366.84
N_FlocChannels = 4
# Entrance Tank:
# [reference: EntranceTank.xmcd]
ND_Lfom = 20 in
HL_Rm = 0.890191 cm
N_Lfom = 1
D_LfomOrifices = 52.3875 mm
Q_LfomErrorMax = 0.74575 %
N_LfomOrifices = [5; 4; 3; 2; 2; 2; 1; 2; 1; 1]
L_Et = 0.53975 m
W_Et = 0.53975 m
HW_EtMin = 0.2 m
HW_EtMax = 0.4 m
H_Et = 0.5 m
ZW_Et = 2.52896 m
# Any additional needed elevations should be calculated in the files above.
# AutoCAD References
# [reference: basics.xmcd]
# [reference: pipe.xmcd]
# [reference: tank.xmcd]
# [reference: lamina.xmcd]
# [reference: cross.xmcd]
# [reference: Tee.xmcd]
# [reference: elbow.xmcd]
# [reference: Sludge.xmcd]
# [reference: Channel.xmcd]
# [reference: Manifold.xmcd]
# [reference: SedTankslopes.xmcd]
# [reference: Sed Tank Inlet Slope.xmcd]
# [reference: chemicalstock.xmcd]
# [reference: Sedimentation Tank.xmcd]
# [component: inputs SedTank]
# [reference: Flocculation Tank.xmcd]
# [component: inputs FlocTank]
# [reference: Entrance Tank.xmcd]
# [component: inputs EntranceTank]
