# AguaClara Water Treatment Plants
# Automated Design
# User Inputs:
HW_Sed := 2.05 m
# Design References
# [reference: UserInputs- Gracias 1W test.xmcd]
# [reference: DesignAssumptions-test.xmcd]
# [reference: MathFunctions.xmcd]
# [reference: PipeDatabase.xmcd]
# [reference: MinorLossCoefficients.xmcd]
# [reference: FluidsFunctions.xmcd]
# Inlet Channel:
N_SedTanks := 6
N_SedInletPipes := 4
# [reference: Inlet Channel.xmcd]
W_InletChannel = 0.712683 m
L_Channel = 7.377 m
ND_SedPipeEntrance = 16 in
N_SedInletPipes = 4
H_InletChannel = 1.13893 m
Q_Plant = 800 gal/min
# Sedimentation Tanks:
# [reference: Sedimentation-gracias 1W test.xmcd]
N_SedTanks = 6
H_SedBelowSlope = 1.03005 m
H_SedBelowStraight = 0.0762 m
H_SedBetween = 0.0762 m
HW_Sed = 2.05 m
H_Sed = 2.15 m
H_SedBelow = 1.10625 m
L_Sed = 9.6182 m
ND_SedPipeEntrance = 16 in
# Sedimentation Tank Sludge Drain:
# [reference: SludgeDrain.xmcd]
N_SedSludgeOrifices = 96
ND_SedSludge = 6 in
Q_SludgeDrainInitial = 1418.99 L/min
D_SedSludgeOrifice = 0.1875 in
# Sedimentation Tank Inlet Slopes:
# [reference: Sed. Inlet Slopes.xmcd]
B_SedInlet = 3.80249 cm
H_SedInlet = 4.96379 cm
AN_SedTopInlet = 60 deg
AN_SedBottom = 10 deg
L_SedTopInlet = 1.0795 m
A_SedInlet = 2266.15 cm^2
H_SedTopInlet = 93.4874 cm
H_SedInletSlopes = 1.03487 m
H_SedBottom = 0.0951725 m
# Sedimentation Tank Effluent Launder:
# [reference: Launder.xmcd]
N_SedLaunderOrifices = 160
Q_SedLaunderOrifices = 1.57725 L/min
# Exit Channel:
# [reference: Exit Channel.xmcd]
W_ExitChannel = 0.712683 m
ND_SedLaunder = 6 in
H_ExitChannel = 1.13893 m
L_SedLaunder = 8.04283 m
L_ExitChannel = 7.377 m
D_SedLaunderOrifice = 0.3125 in
H_PltWeir = 0.903957 m
Z_SedLaunder = 1.92586 m
HW_ExitChannel = 0.998926 m
# Lamella:
# [reference: Lamella.xmcd]
L_SedPlate = 0.931671 m
B_SedPlate = 4.96484 cm
S_SedPlate = 4.66484 cm
N_SedPlates = 131
AN_SedPlate = 60 deg
V_SedC = 10.0072 m/day
V_SedUp = 70 m/day
H_SedPlate = 0.806851 m
H_SedAbove = 0.208275 m
# Flow Controller:
# [reference: FCM.xmcd]
N_Fcm = 6
ID_FcmTube = 4.318 mm
ID_FcmTube = 0.17 in
L_FcmTube = 255.151 cm
Q_FcmTubeMax = 378.541 mL/min
HL_FcmValve = 26.6223 cm
# Flocculator:
# [reference: Flocculation.xmcd]
W_FlocChannel = 0.53975 m
S_FlocBaffle = [0.386239; 0.462041; 0.612545; 1.57366] m
B_FlocBaffle = [0.390239; 0.466041; 0.616545; 1.57766] m
N_FlocBafflesMin = 19
HL_Floc = 7.89618 cm
X_FlocBaffles = [
    0.68975, 8.02954;
    1.07999, 6.45189;
    1.47023, 4.87423;
    1.86047, 3.29657;
    2.32651, 1.71892;
    2.79255, 0;
    3.25859, 0;
    3.87513, 0;
    4.49168, 0;
    5.10822, 0;
    6.68588, 0
] m
HW_FlocStart = 2.12896 m
W_FlocPort = 1.57366 m
L_FlocBaffles = [
    1.66376, 0.476344;
    1.76376, 0.576344;
    1.66376, 0.476344;
    1.76376, 0.576344;
    1.58796, 0.476344;
    1.68796, 0;
    1.58796, 0;
    1.53746, 0;
    1.43746, 0;
    1.53746, 0;
    0.476344, 0
] m
H_FlocPort = 0.53975 m
N_FlocBaffles = 16
Z_FlocBaffles = [
    0, 0;
    0.386239, 1.57366;
    0, 0;
    0.386239, 1.57366;
    0, 0;
    0.462041, 0;
    0, 0;
    0.612545, 0;
    0, 0;
    0.612545, 0;
    0, 0
] m
Gt_FlocMinFlow = 5992.32
N_FlocChannels = 2
# Entrance Tank:
# [reference: EntranceTank.xmcd]
ND_Lfom = 20 in
HL_Rm = 0.890191 cm
N_Lfom = 1
D_LfomOrifices = 52.3875 mm
Q_LfomErrorMax = 0.74575 %
N_LfomOrifices = [5; 4; 3; 2; 2; 2; 1; 2; 1; 1]
L_Et = 0.53975 m
W_Et = 0.53975 m
HW_EtMin = 0.2 m
HW_EtMax = 0.4 m
H_Et = 0.5 m
ZW_Et = 2.37896 m
# Any additional needed elevations should be calculated in the files above.
# AutoCAD References
# [reference: basics.xmcd]
# [reference: pipe.xmcd]
# [reference: tank.xmcd]
# [reference: lamina.xmcd]
# [reference: cross.xmcd]
# [reference: Tee.xmcd]
# [reference: elbow.xmcd]
# [reference: Sludge.xmcd]
# [reference: Channel.xmcd]
# [reference: Manifold.xmcd]
# [reference: SedTankslopes.xmcd]
# [reference: Sed Tank Inlet Slope.xmcd]
# [reference: chemicalstock.xmcd]
# [reference: Sedimentation Tank.xmcd]
# [component: inputs SedTank]
# [reference: Flocculation Tank.xmcd]
# [component: inputs FlocTank]
# [reference: Entrance Tank.xmcd]
# [component: inputs EntranceTank]
