# AguaClara Water Treatment Plants
# Automated Design
# User Inputs:
HW_Sed := 3.3 m
# Design References
# [reference: PipeDatabase.xmcd]
# [reference: UserInputs- Gracias.xmcd]
# [reference: DesignAssumptions- Gracias.xmcd]
# [reference: MathFunctions.xmcd]
# [reference: MinorLossCoefficients.xmcd]
# [reference: FluidsFunctions.xmcd]
# Sedimentation Tanks:
# [reference: Sedimentation - Gracias.xmcd]
N_SlopePairs = 3
N_SedTanks = 6
H_SedBetween = 0.060325 m
HW_Sed = 3.3 m
H_Sed = 3.4 m
L_Sed = 3.20607 m
# Sedimentation Tank Sludge Drain:
# [reference: SludgeDrain.xmcd]
N_SedSludgeOrifices = 32
ND_SedSludge = 4 in
Q_SludgeDrainInitial = 2284.23 L/min
D_SedSludgeOrifice = 0.3125 in
# Height Dimensions within Sedtank
H_SedBelowSlope := .5*W_Sed/N_SlopePairs*tan(AN_SedTopInlet) + T_SedInletSlope/cos(AN_SedTopInlet) + outerdiameter(ND_SedSludge) = 1.14917 m
# This depth of the sloped bottom
H_SedBelow := H_SedBelowSlope + H_SedBetween = 1.2095 m  # the entire area under the lamella will be a part of the sloped bottom
# Inlet Channel:
# [reference: Inlet Channel.xmcd]
W_InletChannel = 0.308257 m
L_Channel = 20.331 m
ND_SedPipeEntrance = 8 in
N_SedInletPipes = 6
H_InletChannel = 2.10083 m
Q_Plant = 800 gal/min
G_FlocMin := 20/s
# Sedimentation Tank Inlet Slopes:
# [reference: Sed. Inlet Slopes- rect.xmcd]
B_SedInlet = 1.90124 cm
L_SedTopInlet = 1.0795 m
H_SedInlet = 5.55886 cm
H_SedTopSlope = 0.934874 m
A_Inlet = 0.178221 m^2
L_SedBottom = 0.704594 m
A_SedInlet = 0.356442 m^2
H_SedBottomSlope = 0.452904 m
AN_SedTopInlet = 60 deg
AN_SedTopInlet = 60 deg
AN_SedBottom = 40 deg
AN_SedBottom = 40 deg
A_SedInletTotal = 0.382371 m^2
A_SedInletActual = 0.382179 m^2
# Note: A.SedInlet should be approx. the same as A.SedInletTotal
Z_SedSlopes = 2.08405 m
L_SedTopInlet = 1.0795 m
# Sedimentation Tank Effluent Launder:
# [reference: Launder.xmcd]
N_SedLaunderOrifices = 48
Q_SedLaunderOrifices = 2.62876 L/min
# Exit Channel:
# [reference: Exit Channel.xmcd]
W_ExitChannel = 0.34385 m
ND_SedLaunder = 4 in
H_ExitChannel = 2.10083 m
L_SedLaunder = 2.40396 m
L_ExitChannel = 20.331 m
D_SedLaunderOrifice = 0.4375 in
H_PltWeir = 1.86586 m
Z_SedLaunder = 3.20285 m
HW_ExitChannel = 1.96083 m
ZW_ExitChannel = 3.26 m
# Lamella:
# [reference: Lamella.xmcd]
H_SedPlate = 1.00133 m
H_SedAbove = 0.1543 m
L_SedPlate = 1.15623 m
B_SedPlate = 4.01609 cm
S_SedPlate = 3.71609 cm
N_SedPlates = 38
AN_SedPlate = 60 deg
V_SedC = 10.0418 m/day
V_SedUp = 70 m/day
# Flow Controller:
# [reference: FCM.xmcd]
N_Fcm = 6
ID_FcmTube = 4.318 mm
ID_FcmTube = 0.17 in
L_FcmTube = 255.151 cm
Q_FcmTubeMax = 378.541 mL/min
HL_FcmValve = 26.6223 cm
# Flocculator:
# [reference: Flocculation.xmcd]
W_FlocChannel = 1.61925 m
S_FlocBaffle = [0.16944; 0.202693; 0.268718; 0.488151] m
B_FlocBaffle = [0.17344; 0.206693; 0.272718; 0.492151] m
N_FlocBafflesMin = 33
HL_Floc = 9.24245 cm
Z_FlocBaffles = [
    0, 0, 0, 0;
    0.16944, 0.16944, 0.268718, 0.488151;
    0, 0, 0, 0;
    0.16944, 0.202693, 0.268718, 0.488151;
    0, 0, 0, 0;
    0.16944, 0.202693, 0.268718, 0;
    0, 0, 0, 0;
    0, 0.202693, 0.488151, 0;
    0, 0, 0, 0;
    0, 0.202693, 0, 0;
    0, 0, 0, 0
] m
X_FlocBaffles = [
    1.76925, 2.70292, 0.503151, 2.70292;
    1.94269, 2.52948, 0.775869, 2.21076;
    2.11613, 2.35604, 1.04859, 1.71861;
    2.28957, 2.14934, 1.3213, 1.22646;
    2.46301, 1.94265, 1.59402, 0.734313;
    2.63645, 1.73596, 1.86674, 0;
    0, 1.52926, 2.13946, 0;
    0, 1.32257, 2.63161, 0;
    0, 1.11588, 0, 0;
    0, 0.909182, 0, 0;
    0, 0.636464, 0, 0
] m
L_FlocBaffles = [
    3.13056, 3.13056, 3.03128, 2.81185;
    3.23056, 3.23056, 3.13128, 2.91185;
    3.13056, 3.13056, 3.03128, 2.81185;
    3.23056, 3.19731, 3.13128, 2.91185;
    3.13056, 3.09731, 3.03128, 2.81185;
    3.23056, 3.19731, 3.13128, 0;
    0, 3.09731, 3.03128, 0;
    0, 3.19731, 2.91185, 0;
    0, 3.09731, 0, 0;
    0, 3.19731, 0, 0;
    0, 3.03128, 0, 0
] m
HW_FlocStart = 3.39242 m
W_FlocPort = 0.488151 m
H_FlocPort = 1.61925 m
N_FlocBaffles = 30
Gt_FlocMinFlow = 6486.88
N_FlocChannels = 4
# Entrance Tank:
# [reference: EntranceTank.xmcd]
ND_Lfom = 20 in
HL_Rm = 0.890191 cm
N_Lfom = 1
D_LfomOrifices = 52.3875 mm
Q_LfomErrorMax = 0.74575 %
N_LfomOrifices = [5; 4; 3; 2; 2; 2; 1; 2; 1; 1]
L_Et = 3 m
W_Et = 1.5 m
HW_EtMin = 0.2 m
HW_EtMax = 0.4 m
H_Et = 3.79242 m
ZW_Et = 3.69242 m
# Any additional needed elevations should be calculated in the files above.
# Elevations:
ZW_ExitChannel = 3.26 m  # Water Level at the end of the plant in the exit channel and exit channel box
HW_Sed = 3.3 m
HW_FlocStart = 3.39242 m  # Water level at the beginning of the floc tank
HL_Floc = 9.24245 cm  # just for ref. the head loss throught the floc tank
ZW_Et = 3.69242 m  # the height of the water in the entrance tank.
Z_Mp := (HW_Sed - HW_InletChannel)
# AutoCAD References
# [reference: basics.xmcd]
# [reference: pipe.xmcd]
# [reference: tank.xmcd]
# [reference: lamina.xmcd]
# [reference: cross.xmcd]
# [reference: Tee.xmcd]
# [reference: elbow.xmcd]
# [reference: Sludge.xmcd]
# [reference: Channel.xmcd]
# [reference: Manifold.xmcd]
# [reference: SedTankslopes.xmcd]
# [reference: Sed Tank Inlet Slope.xmcd]
# [reference: chemicalstock.xmcd]
# [reference: Sedimentation Tank.xmcd]
# [component: inputs SedTank]
# [reference: Flocculation Tank.xmcd]
# [component: inputs FlocTank]
# [reference: Entrance Tank.xmcd]
# [component: inputs EntranceTank]
