# AguaClara Water Treatment Plants
# Automated Design
# User Inputs:
HW_Sed := 3.05 m
# Design References
# [reference: PipeDatabase.xmcd]
# [reference: UserInputs- Gracias.xmcd]
sedlayout = 2
# [reference: DesignAssumptions- Gracias.xmcd]
N_SedTanks := 4
# [reference: MathFunctions.xmcd]
# [reference: MinorLossCoefficients.xmcd]
# [reference: FluidsFunctions.xmcd]
# Sedimentation Tanks:
# [reference: Sedimentation - Gracias.xmcd]
N_SedTanks = 4
H_SedBetween = 0.060325 m
HW_Sed = 3.05 m
H_Sed = 3.15 m
L_Sed = 4.8091 m
# Sedimentation Tank Sludge Drain:
# [reference: SludgeDrain.xmcd]
N_SedSludgeOrifices = 48
ND_SedSludge = 6 in
Q_SludgeDrainInitial = 3166.77 L/min
D_SedSludgeOrifice = 0.3125 in
# Height Dimensions within Sedtank
H_SedBelowSlope := .5*W_Sed/N_SlopePairs*tan(AN_SedTopInlet) + T_SedInletSlope/cos(AN_SedTopInlet) + outerdiameter(ND_SedSludge) = 1.67059 m
# This depth of the sloped bottom
H_SedBelow := H_SedBelowSlope + H_SedBetween = 1.73091 m  # the entire area under the lamella will be a part of the sloped bottom
# Inlet Channel:
# [reference: Inlet Channel-gracias 2W test.xmcd]
W_InletChannel = 2.12236 m
L_Channel = 13.554 m
ND_SedPipeEntrance = 12 in
N_SedInletPipes = 6
H_InletChannel = 0.285052 m
Q_Plant = 800 gal/min
# Sedimentation Tank Inlet Slopes:
# [reference: Sed. Inlet Slopes- minV.xmcd]
B_SedInlet = 2.97561 cm
L_SedTopFilled = -1.11879 m
H_SedInlet = 8.70009 cm
W_SlopesFilled = -0.559395 m
L_SedBottomFilled = -0.730239 m
AN_SedTopInlet = 60 deg
L_SedTopInlet = 1.61925 m
AN_SedBottom = 40 deg
A_SedInletTotal = 2926.61 cm^2
A_SedInlet = 8367.92 cm^2
H_SedTopSlope = 1.40231 m
A_SedInletActual = 2921.9 cm^2
A_Inlet = 4183.96 cm^2
L_SedBottom = 1.05689 m
Z_SedSlopes = 1.67059 m
H_SedBottomSlope = 0.679356 m
L_SedTopInlet = 1.61925 m
W_SlopesOpen = 1.36902 m
# Sedimentation Tank Effluent Launder:
# [reference: Launder.xmcd]
N_SedLaunderOrifices = 8
Q_SedLaunderOrifices = 15.7725 L/min
# Exit Channel:
# [reference: Exit Channel.xmcd]
W_ExitChannel = 2.12236 m
ND_SedLaunder = 4 in
H_ExitChannel = 0.285052 m
L_SedLaunder = 0.414379 m
L_ExitChannel = 13.554 m
D_SedLaunderOrifice = 1 in
H_PltWeir = 0.0500827 m
Z_SedLaunder = 2.95285 m
HW_ExitChannel = 0.145052 m
# Lamella:
# [reference: Lamella.xmcd]
L_SedPlate = 1.34498 m
B_SedPlate = -0.693998 cm
S_SedPlate = -0.993998 cm
N_SedPlates = 52
AN_SedPlate = 60 deg
V_SedC = 9.93684 m/day
V_SedUp = 70 m/day
H_SedPlate = 1.16479 m
H_SedAbove = 0.1543 m
# Flow Controller:
# [reference: FCM.xmcd]
N_Fcm = 6
ID_FcmTube = 4.318 mm
ID_FcmTube = 0.17 in
L_FcmTube = 255.151 cm
Q_FcmTubeMax = 378.541 mL/min
HL_FcmValve = 26.6223 cm
# Flocculator:
# [reference: Flocculation.xmcd]
W_FlocChannel = 1.61925 m
S_FlocBaffle = [0.16944; 0.202693; 0.268718; 0.563668] m
B_FlocBaffle = [0.17344; 0.206693; 0.272718; 0.567668] m
N_FlocBafflesMin = 33
HL_Floc = 9.10213 cm
X_FlocBaffles = [
    1.76925, 4.23043, 0.578668;
    1.94269, 4.02374, 1.14634;
    2.11613, 3.75102, 1.714;
    2.28957, 3.4783, 2.28167;
    2.46301, 3.20558, 0;
    2.63645, 2.93287, 0;
    2.80989, 2.66015, 0;
    2.98333, 2.38743, 0;
    3.19002, 2.11471, 0;
    3.39671, 1.54704, 0;
    3.60341, 0.979376, 0;
    3.8101, 0, 0;
    4.01679, 0, 0;
    4.22349, 0, 0
] m
HW_FlocStart = 3.14102 m
L_FlocBaffles = [
    2.88056, 2.84731, 2.48633;
    2.98056, 2.94731, 2.58633;
    2.88056, 2.78128, 2.48633;
    2.98056, 2.88128, 2.58633;
    2.88056, 2.78128, 0;
    2.98056, 2.88128, 0;
    2.88056, 2.78128, 0;
    2.98056, 2.88128, 0;
    2.84731, 2.78128, 0;
    2.94731, 2.58633, 0;
    2.84731, 2.48633, 0;
    2.94731, 0, 0;
    2.84731, 0, 0;
    2.94731, 0, 0
] m
W_FlocPort = 0.563668 m
H_FlocPort = 1.61925 m
N_FlocBaffles = 29
Z_FlocBaffles = [
    0, 0, 0;
    0.16944, 0.202693, 0.563668;
    0, 0, 0;
    0.16944, 0.268718, 0.563668;
    0, 0, 0;
    0.16944, 0.268718, 0;
    0, 0, 0;
    0.16944, 0.268718, 0;
    0, 0, 0;
    0.202693, 0.563668, 0;
    0, 0, 0;
    0.202693, 0, 0;
    0, 0, 0;
    0.202693, 0, 0
] m
Gt_FlocMinFlow = 6270.65
N_FlocChannels = 3
# Entrance Tank:
# [reference: EntranceTank.xmcd]
ND_Lfom = 20 in
HL_Rm = 0.890191 cm
N_Lfom = 1
D_LfomOrifices = 52.3875 mm
Q_LfomErrorMax = 0.74575 %
N_LfomOrifices = [5; 4; 3; 2; 2; 2; 1; 2; 1; 1]
L_Et = 3 m
W_Et = 1.5 m
HW_EtMin = 0.2 m
HW_EtMax = 0.4 m
H_Et = 3.54102 m
ZW_Et = 3.44102 m
# Any additional needed elevations should be calculated in the files above.
# Elevations:
ZW_ExitChannel = 3.01 m  # Water Level at the end of the plant in the exit channel and exit channel box
HW_Sed = 3.05 m
HW_FlocStart = 3.14102 m  # Water level at the beginning of the floc tank
HL_Floc = 9.10213 cm  # just for ref. the head loss throught the floc tank
ZW_Et = 3.44102 m  # the height of the water in the entrance tank.
Z_Mp := (HW_Sed - HW_InletChannel)
# AutoCAD References
# [reference: basics.xmcd]
# [reference: pipe.xmcd]
# [reference: tank.xmcd]
# [reference: lamina.xmcd]
# [reference: cross.xmcd]
# [reference: Tee.xmcd]
# [reference: elbow.xmcd]
# [reference: Sludge.xmcd]
# [reference: Channel.xmcd]
# [reference: Manifold.xmcd]
# [reference: SedTankslopes.xmcd]
# [reference: Sed Tank Inlet Slope.xmcd]
# [reference: chemicalstock.xmcd]
# [reference: Sedimentation Tank.xmcd]
# [component: inputs SedTank]
# [reference: Flocculation Tank.xmcd]
# [component: inputs FlocTank]
# [reference: Entrance Tank.xmcd]
# [component: inputs EntranceTank]
