# First I want an estimate of the maximum rate that flocs will be flowing over the weir. I get that estimate two ways, from the rate of floc blanket growth from Matt Hurst's work, and from the floc model (to get an estimate at 500 NTU)
ϕ_FB100NTU := 7.5*cm/hr/(100*m/day) = 0.018
# This is at 100 NTU based on results from Matt Hurst. The floc blanket grows at a rate of 7.5 cm/hr when the upflow velocity is 100 m/day.
# This is from the floc model with the 0.5 accounting for the fact that the floc model is predicting the floc volume fraction and the floc blanket includes water between the flocs. Note that this estimate is close to 5 times the 100 NTU measured values.
ϕ_FB500NTU := 0.054/0.5 = 0.108
N_Sed := 2
Q_Plant := 380*L/min
Q_SedTank := Q_Plant/N_Sed = 190 L/min
Q_Floc := Q_SedTank*ϕ_FB500NTU = 20.52 L/min
# Thus at 500 NTU the flow of floc blanket over the weir could be 20 L/min!
W_Sed := 42.5 in
# Can we use the critical velocity idea to figure out how deep the floc blanket will be where it flows over the edge of the weir?
# Need the density of the floc blanket
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# Sharp crested weir
C_d := 1
ρ_H2O := 1000*kg/m^3
ρ_FB := 1001*kg/m^3
# This is a low estimate, but low is good because the top of the floc blanket is less dense. We really need a density profile at the top of the floc blanket to model this accurately since it is the density gradient that powers the flow across the weir. The weir equation assumes a sharp interface between two fluids. Normally the two fluids are water and air and thus the density term is equal to one for that case. Here the density of the two fluids (water and water plus flocs) are very close and thus we get a much deeper flow over the weir.
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H_Weir := (Q_Floc/(2/3*C_d*W_Sed*sqrt(2*g*(ρ_FB - ρ_H2O)/ρ_H2O)))^(2/3) = 2.25812 cm
# Given this height above the weir a gap of at least 5 cm should provide a reasonable safety factor to account for our uncertainty in the density gradient at the top of the foc blanket.
# Does this flow over the weir have high enough velocity to break up flocs?
V_weir := Q_Floc/(H_Weir*W_Sed) = 0.01403 m/s
# This velocity is about an order of magnitude lower than the velocity in the flocculator and thus  it shouldn't cause floc breakup. We should calculate the energy dissipation rate in the expansion on the floc hopper side of the weir to verify this.
# Floc consolidation in the floc hopper. There will be some consolidation of the floc blanket in the floc hopper since there will no longer be an upflow velocity of 70 m/day. This dewatering will reduce the amount of waste from the plant. The water that is being squeezed out from between and from inside the flocs has to flow up through the flocs above and then out above the weir. I don't have a good way to design this yet, but we do know from Matt Hurst's work that  at 30 m/day a floc blanket fails because it settles. So let's see what happens if we set the maximum upflow velocity in the floc hopper to 30 m/day. We can use this to find the minimum distance from the floc weir to the end of the sedimentation tank.
V_UpFlocHopper := 30*m/day
A_FlocHopper := Q_Floc/V_UpFlocHopper = 0.98496 m^2
L_FlocHopper := A_FlocHopper/W_Sed = 0.912422 m
# The desired floc hopper size based on this analysis is larger than I had anticipated. The analysis above doesn't account for the fact that water will be flowing down through the floc hopper as well (and going to waste). During low turbidity periods the operator might open the floc hopper drain once per day. During high turbidity events the operator should open the valve to get a flow rate of perhap 5 to 20 liters per minute. The waste flow could be subracted from Q.Floc in the equation above. Thus I'm not too worried if we can't get the 0.9 meters suggested above, but we might as well try to make the hopper as large as we can without endangering the performance of the sed tank.
# I recommend the following for the weir.
# We need a gap of 5 cm to allow space for the flow of flocs over the weir. Given that the lamella start 5 cm above the height of the weir, the weir can be place right under the first  lamella. The weir can extend out into the sedimentation tank without causing any harm if the lamella are slanted away from the weir. Use of the end of sed tank for a large floc hopper will make excellent use of the space at the weir end of the sed tank and will allow for maximum consolidation in the floc hopper. Given that we shouldn't be impairing the sedimentation tank performance as long it doesn't extend underneath the lamella, I suggest that we set x1 so that the weir is directly underneath the first lamella.
#
# The angle of the weir isn't critical. The 60 degree slope is a recommendation to help make the floc hopper self cleaning. Steeper is fine of course. Shallower angles could begin to not drain as well.
#
# The bottom of the floc hopper must be made of sloped surfaces. Thus if the weir intersects with the bottom of the sed tank away from the end wall of the sed tank the end wall of the floc hopper can be sloped as shown below. The bottom of the floc hopper must also be sloped up from the central floc hopper drain pipe toward the two side walls of the sed tank.
#
# If it is easy to make the top of the floc hopper weir removable or adjustable that would be great. Perhaps a plank of ferrocement could be used to add the top 10 cm of the weir. It is possible that it would be useful to drop the height of the floc blanket to get it further away from the plate settlers. However, I understand that the plate settlers continue to perform well even if the floc blanket extends into the bottom of the plate setlers.
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L_FlocHopperOffset := L_SedPlate*cos(AN_SedPlate)  # error: This variable is undefined.
