# Flocculation Function
# The Flocculator program should be calculating the spacing between baffles for all sections. the number of baffles in each section and the placement of the baffles throughout the flocculator.
# References:
HW_Sed := 2 m
# [reference: UserInputs- Gracias.xmcd]
# [reference: DesignAssumptions- Gracias.xmcd]
# [reference: MathFunctions -Gracias.xmcd]
# [reference: PipeDatabase - Gracias.xmcd]
# [reference: MinorLossCoefficients - Gracias.xmcd]
# [reference: FluidsFunctions - Gracias.xmcd]
# [reference: Influent sed manifold - Gracias.xmcd]
# [reference: SludgeDrain-Gracias.xmcd]
# [reference: Sedimentation Dimensions - Gracias.xmcd]
# [reference: Inlet Channel - Gracias.xmcd]
# [reference: Launder - Gracias.xmcd]
# [reference: Exit Channel - Gracias.xmcd]
# [reference: Lamella - Gracias.xmcd]
D_FlocFractal := 2.3
N_FlocWidthFactor := 2
Π_FlocFlocs := 530
θ_FlocEst := 20 min
Π_FlocCell := 2
D_FlocFinal := 5 mm
# The length of one channel of the flocculator is equal to the length of a sed tank . Therefore the total length is equal to the number of channels times the length of a sed tank. The width of a flocculator is equal to the width of a sed tank divided by the number of channels (to make "upward velocity" equal in the two tanks. The water depth at the end of the flocculaor must be the same as the water depth in the sed tank.
G_FlocBodMin := 20/sec
Π_FlocBod := 30 m^(2/3)
# Floc Calculations:
W_FlocChannel := N_FlocWidthFactor*W_SedSingle/2 = 1.0795 m
ED_Floc := G_FlocBod^2*Nu_Water = [14.4; 3.6; 0.4] mW/kg
S_FlocBaffle := (K_FlocBaffle180*Q_Plant^3/(2*Π_FlocCell*ED_Floc*W_FlocChannel^3))^(1/4) = [26.8216; 37.9315; 65.6993] cm
B_FlocBaffle := S_FlocBaffle + T_FlocBaffle = [27.2216; 38.3315; 66.0993] cm
Π_FlocContribution := (Π_FlocCell*K_FlocBaffle180*Q_Plant/(2*W_FlocChannel*ED_Floc^(1/3)))^(1/2) = [0.755743; 0.952176; 1.37328] m^(2/3)
N_FlocBaffles := ceil(Π_FlocBod/(last(G_FlocBod) + 1)/Π_FlocContribution) = [14; 11; 8]
θ_FlocSection :=
    for i ∈ 0 .. last(G_FlocBod)
        θ[i] ← B_FlocBaffle[i]*N_FlocBaffles[i]*HW_Sed*W_FlocChannel/Q_Plant
    return θ
    = [2.74267; 3.03445; 3.80556] min
θ_Floc := sum(vectorize(θ_FlocSection)) = 9.58268 min
# Still working on determining the Total length of the Flocculator and the Number of Channels etc...
L_FlocTankEst := Q_Plant*θ_Floc/(HW_Sed*W_FlocChannel) = 13.3154 m
# Split Flocculator Baffles Evenly? Constraints on distribution?
N_FlocChannels := ceil(L_FlocTankEst/L_Sed) = 3
L_FlocTank := N_FlocChannels*L_Sed = 14.2923 m
θ_FlocFinal := HW_Sed*L_FlocTank*W_FlocChannel/Q_Plant = 10.2857 min
Gt_Floc := sum(vectorize(G_FlocBod*θ_FlocSection)) = 35237.9
HL_FlocBaffle := h_erect(Q_Plant, W_FlocChannel, S_FlocBaffle, K_FlocBaffle180) = [0.456137; 0.228068; 0.0760228] cm
# calculates the head loss per baffle and then finds the total headloss
# This head loss calculation is based on the ideal design that doesn't yet account for how the baffles are actually placed in the channels. The error will be small since it is the last section of baffle spacings that might have a different number of baffles
HL_Floc := sum(vectorize(N_FlocBaffles*HL_FlocBaffle)) = 9.50284 cm
HW_FlocStart := HW_Sed + HL_Floc = 2.09503 m  # Calculate the water level at the entrance to the floc tank
H_Floc := HW_FlocStart + H_PlantFreeboard = 2.19503 m
# G at the port is based on the G at the end of the flocculator because the low G region of the flocculator is so long.
W_FlocPort := S_FlocBaffle[last(G_FlocBod)] = 65.6993 cm
H_FlocPort := W_FlocChannel*S_FlocBaffle[last(G_FlocBod)]*Pi_FlocBaffle/W_FlocPort = 107.95 cm
# Now we need to assign positions, lengths and elevations to floc baffles
L_FlocBaffleLower := HW_Sed - S_FlocBaffle*Pi_FlocBaffle = [1.73178; 1.62068; 1.34301] m
L_FlocBaffleUpper := H_Sed - S_FlocBaffle*Pi_FlocBaffle = [1.83178; 1.72068; 1.44301] m
L_BaffleSection :=
    for i ∈ 0 .. last(N_FlocBaffles)
        L[i] ← N_FlocBaffles[i]*B_FlocBaffle[i]
    return L
    = [3.81103; 4.21647; 5.28795] m  # This calculates the length of flocculator taken up by each section of baffles
# First baffle is a lower baffle because rapid mix pipe enters low
# Ideally have odd number of baffles in first channel (enter low, exit low)
# Ideally have even number of baffles in 2nd channel (enter low, exit high), but I haven't done any coding to get the right number of baffles (odd or even). The fit of the baffles could potentially be improved by
Loc_FlocBaffles :=
    X[0, N_FlocChannels - 1] ← 0 m
    L[0, N_FlocChannels - 1] ← 0 m
    Z[0, N_FlocChannels - 1] ← 0 m
    section ← 0
    BafflesInSection ← 0
    X[0, 0] ← W_FlocChannel + T_ChannelWall
    for Channel ∈ 0 .. N_FlocChannels - 1
        i ← 0
        X_FirstBaffleInChannel ← W_FlocChannel + T_ChannelWall if Channel == 0
        X_FirstBaffleInChannel ← W_FlocPort + S_FlocPort otherwise
        X[i, Channel] ← X_FirstBaffleInChannel
        L[i, Channel] ← L_FlocBaffleLower[section]
        Z[i, Channel] ← 0 m
        X_LastBaffleInChannel ← L_Sed - (W_InletChannel + S_FlocPort) if Channel == N_FlocChannels - 1
        X_LastBaffleInChannel ← L_Sed - (W_FlocPort + S_FlocPort) otherwise
        while X[i, Channel] + B_FlocBaffle[section] < X_LastBaffleInChannel
            i ← i + 1
            BafflesInSection ← BafflesInSection + 1
            if BafflesInSection == N_FlocBaffleSection[section] and section < last(G_FlocBod)
                section ← section + 1
                BafflesInSection ← 1
            X[i, Channel] ← X[i - 1, Channel] + B_FlocBaffle[section]
            if mod(i, 2) == 1
                L[i, Channel] ← L_FlocBaffleUpper[section]
                Z[i, Channel] ← S_FlocBaffle[section]*Pi_FlocBaffle
            otherwise
                L[i, Channel] ← L_FlocBaffleLower[section]
                Z[i, Channel] ← 0 m
        for k ∈ 0 .. last(X[:, 0])
            X[k, Channel] ← L_Sed - X[k, Channel] if mod(Channel, 2) == 1 and X[k, Channel] ≠ 0
    return [X, L, Z]
# section is index of the spacing of baffles
# First baffle is away from wall to allow elbow to deflect water downward
# This code works with any number of flocculator channels
# i is the number of baffles in a channel
# Each channel starts with a lower baffle
# Move to the next spacing if baffles in section equals target number of baffles in section and if the section isn't the last section
# Mod handles the odd and even baffles
# Reverse the direction of odd numbered channels
X_FlocBaffles := Loc_FlocBaffles[0, 0]
L_FlocBaffles := Loc_FlocBaffles[0, 1]
Z_FlocBaffles := Loc_FlocBaffles[0, 2]
N_FlocBaffles :=
    N ← 0
    i ← 0
    Channel ← 0
    for Channel ∈ 0 .. N_FlocChannels - 1
        for i ∈ 0 .. last(X_FlocBaffles[:, 0])
            N ← N + 1 if X_FlocBaffles[i, Channel] ≠ 0 m
    return N
Gt_FlocMinFlow := N_FlocBaffles*Gt_FlocBaffleMin
