# Flocculation Function
# The Flocculator program should be calculating the spacing between baffles for all sections. the number of baffles in each section and the placement of the baffles throughout the flocculator.
# References:
HW_Sed := 2 m
# The length of one channel of the flocculator is equal to the length of a sed tank . Therefore the total length is equal to the number of channels times the length of a sed tank. The width of a flocculator is equal to the width of a sed tank divided by the number of channels (to make "upward velocity" equal in the two tanks. The water depth at the end of the flocculaor must be the same as the water depth in the sed tank.
# [reference: UserInputs- Gracias.xmcd]
# [reference: DesignAssumptions- Gracias.xmcd]
# [reference: MathFunctions -Gracias.xmcd]
# [reference: PipeDatabase.xmcd]
# [reference: MinorLossCoefficients - Gracias.xmcd]
# [reference: FluidsFunctions - Gracias.xmcd]
# [reference: Influent sed manifold - Gracias.xmcd]
# [reference: SludgeDrain-Gracias.xmcd]
# [reference: Sedimentation Dimensions - Gracias.xmcd]
# [reference: Inlet Channel - Gracias.xmcd]
# [reference: Launder - Gracias.xmcd]
# [reference: Exit Channel - Gracias.xmcd]
# [reference: Lamella - Gracias.xmcd]
# I changed the Π.FlocBod. This is great because this parameter actually makes sense with the model predictions. I had reduced the value from the model predictions previously to get the value of 30 m^2/3 because I erroneously thought that the model predictions were giving too large a residence time.
Π_FlocBod := 70 m^(2/3)
Π_FlocCell := 2
N_FlocWidthFactor := 2
# Floc Calculations:
# Add equation here to check for minimum width that gives a baffle spacing that is
HW_FlocEnd := HW_Sed = 2 m
S_FlocBaffleEnd := 1/2*HW_FlocEnd = 1 m
ED_Floc := G_FlocBod^2*Nu_Water = [14.4; 3.6; 0.4] mW/kg
W_FlocChannel := (K_FlocBaffle180*Q_Plant^3/(2*Π_FlocCell*ED_Floc[last(G_FlocBod)]*S_FlocBaffleEnd^4))^(1/3) = 0.616553 m
# Change the Bod to have ED.FlocBod insteadof G to eliminate this step
S_FlocBaffle := (K_FlocBaffle180*Q_Plant^3/(2*Π_FlocCell*ED_Floc*W_FlocChannel^3))^(1/4) = [40.8248; 57.735; 100] cm
# The distance between baffles was set by the energy dissipation desired for each section. The Width
# of the flocculator was set to be the equal to the large baffle spacing and the depth of the flocculator was set to be Pi.FlocCell times the largest baffle spacing.
B_FlocBaffle := S_FlocBaffle + T_FlocBaffle = [41.2248; 58.135; 100.4] cm
Π_FlocCell = 2
Π_FlocContribution := (Π_FlocCell*K_FlocBaffle180*Q_Plant/(2*W_FlocChannel*ED_Floc^(1/3)))^(1/2) = [1; 1.25992; 1.81712] m^(2/3)
N_FlocBaffles := ceil(Π_FlocBod/(length(ED_Floc)*Π_FlocContribution)) = [24; 19; 13]
# This makes the total collision potential in each baffle spacing section be the same. Hopefully someday we will have a method of choosing this section length based on theory or experiments.
θ_Floc := B_FlocBaffle*N_FlocBaffles*HW_FlocEnd*W_FlocChannel/Q_Plant = 13.9718 min
# Should this be B.FlocBaffle or S.FlocBaffle. THis isn't really important, just thinking about this conceptually. I think the answer is neither... and that we would need to figure out the volume of the submerged baffles and subtract that from the total volume of the flocculator. But I don't really care because the difference is insignificant!
# Still working on determining the Total length of the Flocculator and the Number of Channels etc...
L_FlocTankEst := Q_Plant*θ_Floc/(HW_FlocEnd*W_FlocChannel) = 33.9916 m
# Split Flocculator Baffles Evenly? Constraints on distribution?
# A better design will use longer sed tanks and thus will have shorter channels. I think the sed tanks should be made much longer than they are currently. The total wall length including floc channel walls should be calculated and minimized.
N_FlocChannels := ceil(L_FlocTankEst/L_Sed) = 8
L_FlocTank := N_FlocChannels*L_Sed = 38.1129 m
θ_FlocFinal := HW_FlocEnd*L_FlocTank*W_FlocChannel/Q_Plant = 15.6657 min
HL_FlocBaffle := h_erect(Q_Plant, W_FlocChannel, S_FlocBaffle, K_FlocBaffle180) = [0.603561; 0.30178; 0.100593] cm
# calculates the head loss per baffle and then finds the total headloss
# This head loss calculation is based on the ideal design that doesn't yet account for how the baffles are actually placed in the channels. The error will be small since it is the last section of baffle spacings that might have a different number of baffles
HL_Floc := sum(vectorize(N_FlocBaffles*HL_FlocBaffle)) = 21.527 cm
HW_FlocStart := HW_FlocEnd + HL_Floc = 2.21527 m  # Calculate the water level at the entrance to the floc tank
H_Floc := HW_FlocStart + H_PlantFreeboard = 2.31527 m
# G at the port is based on the G at the end of the flocculator because the low G region of the flocculator is so long.
W_FlocPort := S_FlocBaffle[last(G_FlocBod)] = 100 cm
H_FlocPort := W_FlocChannel*S_FlocBaffle[last(G_FlocBod)]*Pi_FlocBaffle/W_FlocPort = 61.6553 cm
# This keeps the velocity through the port the same as the velocity in the channel
# Now we need to assign positions, lengths and elevations to floc baffles
L_FlocBaffleLower := HW_FlocEnd - S_FlocBaffle*Pi_FlocBaffle = [1.59175; 1.42265; 1] m
L_FlocBaffleUpper := H_Floc - S_FlocBaffle*Pi_FlocBaffle = [1.90702; 1.73792; 1.31527] m
L_BaffleSection :=
    for i ∈ 0 .. last(N_FlocBaffles)
        L[i] ← N_FlocBaffles[i]*B_FlocBaffle[i]
    return L
    = [9.89396; 11.0457; 13.052] m  # This calculates the length of flocculator taken up by each section of baffles
# First baffle is a lower baffle because rapid mix pipe enters low
# Ideally have odd number of baffles in first channel (enter low, exit low)
# Ideally have even number of baffles in 2nd channel (enter low, exit high), but I haven't done any coding to get the right number of baffles (odd or even). The fit of the baffles could potentially be improved by
Loc_FlocBaffles :=
    X[0, N_FlocChannels - 1] ← 0 m
    L[0, N_FlocChannels - 1] ← 0 m
    Z[0, N_FlocChannels - 1] ← 0 m
    section ← 0
    BafflesInSection ← 0
    X[0, 0] ← W_FlocChannel + T_ChannelWall
    for Channel ∈ 0 .. N_FlocChannels - 1
        i ← 0
        X_FirstBaffleInChannel ← W_FlocChannel + T_ChannelWall if Channel == 0
        X_FirstBaffleInChannel ← W_FlocPort + S_FlocPort otherwise
        X[i, Channel] ← X_FirstBaffleInChannel
        L[i, Channel] ← L_FlocBaffleLower[section]
        Z[i, Channel] ← 0 m
        X_LastBaffleInChannel ← L_Sed - (W_InletChannel + S_FlocPort) if Channel == N_FlocChannels - 1
        X_LastBaffleInChannel ← L_Sed - (W_FlocPort + S_FlocPort) otherwise
        while X[i, Channel] + B_FlocBaffle[section] < X_LastBaffleInChannel
            i ← i + 1
            BafflesInSection ← BafflesInSection + 1
            if BafflesInSection == N_FlocBaffleSection[section] and section < last(G_FlocBod)
                section ← section + 1
                BafflesInSection ← 1
            X[i, Channel] ← X[i - 1, Channel] + B_FlocBaffle[section]
            if mod(i, 2) == 1
                L[i, Channel] ← L_FlocBaffleUpper[section]
                Z[i, Channel] ← S_FlocBaffle[section]*Pi_FlocBaffle
            otherwise
                L[i, Channel] ← L_FlocBaffleLower[section]
                Z[i, Channel] ← 0 m
        for k ∈ 0 .. last(X[:, 0])
            X[k, Channel] ← L_Sed - X[k, Channel] if mod(Channel, 2) == 1 and X[k, Channel] ≠ 0
    return [X, L, Z]
# section is index of the spacing of baffles
# First baffle is away from wall to allow elbow to deflect water downward
# This code works with any number of flocculator channels
# i is the number of baffles in a channel
# Each channel starts with a lower baffle
# Move to the next spacing if baffles in section equals target number of baffles in section and if the section isn't the last section
# Mod handles the odd and even baffles
# Reverse the direction of odd numbered channels
X_FlocBaffles := Loc_FlocBaffles[0, 0]
L_FlocBaffles := Loc_FlocBaffles[0, 1]
Z_FlocBaffles := Loc_FlocBaffles[0, 2]
N_FlocBaffles :=
    N ← 0
    i ← 0
    Channel ← 0
    for Channel ∈ 0 .. N_FlocChannels - 1
        for i ∈ 0 .. last(X_FlocBaffles[:, 0])
            N ← N + 1 if X_FlocBaffles[i, Channel] ≠ 0 m
    return N
Gt_FlocMinFlow := N_FlocBaffles*Gt_FlocBaffleMin
