# [reference: UserInputs- Gracias.xmcd]
# [reference: DesignAssumptions- Gracias.xmcd]
# [reference: MathFunctions -Gracias.xmcd]
# [reference: PipeDatabase.xmcd]
# [reference: MinorLossCoefficients - Gracias.xmcd]
# [reference: FluidsFunctions - Gracias.xmcd]
# The purpose of this program is to check the design of the sedimentation tank influent manifold and to determine the effect of the ratio of the Manifold to the total port area. Conventional design guidelines suggested a area ratio of 4, but that forces us to use a very large manifold with the likely consequence that more flocs will settle in the manifold. In addition a large manifold will limit the length of our sed tanks or will require the sed tanks to be deeper.
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Q_SedSlopePort := V_SedUpBod*W_SedSingle/2*W_SedSlopePlate
# Area of the mainfold port needed to not breakup flocs.
# increase the area of the port to account for the vena contracta
B_SedPort := sqrt(A_Port(Π_SedCell, K_PipeEnt, Q_SedSlopePort, ED_Slope, Pi_VenaContractaOrifice)) = 0.0620839 m  # Ports are assumed square here.
L_SedPort := B_SedPort/sin(AN_SedTopInlet) = 0.0716883 m  # The cut length is adjusted for the angle of the plate.
W_SedPort := B_SedPort = 0.0620839 m  # Width is set to make the smallest area the water travels through square.
W_SedSlopeSpace := 5.0 cm  # The space between the ends of the sed slope triangles in the bottom of the slope
W_SedSlopeManifold := W_SedSingle/2 - W_SedSlopeSpace/2 - T_SedInletSlope*sin(AN_SedTopInlet) = 47.1449 cm
# The following program estimates the head required to provide the flow through the ports and then calculates the flow through every port while keeping track of the changes in the hydraulic grade line.  It then compares the calculated total flow to the desired manifold flow and applies a correction factor
# and then recalculates.
# These Collapsed areas contain functions that calculate the array of port flows down the length of the manifold and based on these the maximum length the sed tank can be based on a given manifold area.
# From the graph in "Influent sed manifold design model" it can be seen that the Pi.SedArea ratio term should be some where between 1.5 and 2 in order to get about an 85 to 90% uniform flow ratio.
A_FlocPort(Π_FlocCell, K_Exit, Q, ED_LargeFloc, Pi_VenaContractaOrifice)
Q_SedSlopePorts(A_SedManifold, V_SedUpBod, W_SedSlopeManifold, L_Sed, Π_SedCell, K_PipeEnt, W_SedSlopePlate, ED_Slope, Pi_SedArea, Pi_VenaContractaOrifice, Nu_Water, E_Concrete) :=
    n_Ports ← floor(L_Sed/W_SedSlopePlate)
    Q_SedSlopePort ← V_SedUpBod*W_SedSlopeManifold*W_SedSlopePlate
    A_Port ← A_FlocPort(Π_SedCell, K_PipeEnt, Q_SedSlopePort, ED_Slope, Pi_VenaContractaOrifice)
    Q_SedInlet ← V_SedUpBod*W_SedSlopeManifold*L_Sed
    D_Manifold ← D_circle(A_SedManifold)
    V[0] ← Q_SedInlet/A_SedManifold
    Q_m[0] ← Q_SedInlet
    H_m[0] ← 1/(2*g)*(Q_SedInlet/(n_Ports*Pi_VenaContractaOrifice*A_Port))^2 - V[0]^2/(2*g)
    maxerror ← 0.00001
    error ← 1
    while error > maxerror
        for i ∈ 0 .. n_Ports - 1
            Q_p[i] ← Pi_VenaContractaOrifice*A_Port*sqrt(2*g*H_m[i])
            V[i + 1] ← max(V[i] - Q_p[i]/A_SedManifold, 0.000000001*m/s)
            Q_m[i + 1] ← A_SedManifold*V[i + 1]
            ΔH_Exp ← (V[i] - V[i + 1])*V[i + 1]/g
            H_m[i + 1] ← H_m[i] + V[i]^2/(2*g) - V[i + 1]^2/(2*g) + ΔH_Exp - h_f(Q_m[i + 1], D_Manifold, W_SedSlopePlate, Nu_Water, E_Concrete)
        error ← ((Q_SedInlet/sum(Q_p))^2 - 1)^2
        H_m[0] ← H_m[0]*(Q_SedInlet/sum(Q_p))^2
    return Q_p
# pressure recovery dominates the flow in the manifold and thus to get a decent initial prediction of the required head at the beginning of the manifold we subtract the velocity head. This ends up giving a very good first guess.
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# Port velocity head term - manifold velocity head term
# This prevents the flow from every going backwards in the manifold. When the correct initial head is attained this minimum flow won't be applied anymore. It is needed if the initial head is too low.
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# Use major losses only in manifold
L_MaxSed(A_SedManifold, V_SedUpBod, W_SedSlopeManifold, Π_SedCell, K_PipeEnt, W_SedSlopePlate, ED_Slope, Pi_Flow, Pi_VenaContractaOrifice, Nu_Water, E_Concrete) :=
    Pi_SedArea ← 2
    Q_SedSlopePort ← V_SedUpBod*W_SedSlopeManifold*W_SedSlopePlate
    A_Port ← A_FlocPort(Π_SedCell, K_PipeEnt, Q_SedSlopePort, ED_Slope, Pi_VenaContractaOrifice)
    L_Sed ← A_SedManifold/A_Port*W_SedSlopePlate/Pi_SedArea
    Q_Ports ← Q_SedSlopePorts(A_SedManifold, V_SedUpBod, W_SedSlopeManifold, L_Sed, Π_SedCell, K_PipeEnt, W_SedSlopePlate, ED_Slope, Pi_SedArea, Pi_VenaContractaOrifice, Nu_Water, E_Concrete)
    Pi_FlowActual ← min(Q_Ports)/max(Q_Ports)
    maxerror ← 0.01
    error ← 1
    iteration ← 0
    L_SedNew ← L_Sed
    while error > maxerror
        iteration ← iteration + 1
        L_Sed ← L_SedNew
        Q_Ports ← Q_SedSlopePorts(A_SedManifold, V_SedUpBod, W_SedSlopeManifold, L_Sed, Π_SedCell, K_PipeEnt, W_SedSlopePlate, ED_Slope, Pi_SedArea, Pi_VenaContractaOrifice, Nu_Water, E_Concrete)
        Pi_FlowActual ← min(Q_Ports)/max(Q_Ports)
        error ← |(Pi_FlowActual - Pi_Flow)/(Pi_FlowActual + Pi_Flow)|
        L_SedNew ← L_Sed*(Pi_FlowActual/Pi_Flow)^1
        trace("For iteration {0}, Pi.FlowActual = {1}, L.Sed={2}, L.SedNew={3}", iteration, Pi_FlowActual, L_Sed, L_SedNew)
    return L_SedNew  # intial guess on area ratio
# First assume area ratio of 2, to get initial length of sed tank. Then calculate Pi.Flow and iterate to converge on the target Pi.Flow.
# It is important that this max error be less stringent than the function that it calls (Q.Ports), otherwise this function will oscillate.
# The power relationship was a guess based on trial and error. Higher powers tended to overshoot the solution.
# The trace line can be used to print intermediate results from the loop to see if it is converting (Debug option)
Pi_SedArea := 2
L_SedMax :=
    Pi_Flow ← 0.85
    L_SedEst ← 4 m
    N_SedPorts ← floor(L_SedEst/W_SedSlopePlate)
    A_SedManifold ← A_FlocPort(Π_SedCell, K_PipeEnt, Q_SedSlopePort, ED_Slope, Pi_VenaContractaOrifice)*N_SedPorts*Pi_SedArea
    L_SedMaxEst ← L_MaxSed(A_SedManifold, V_SedUpBod, W_SedSlopeManifold, Π_SedCell, K_PipeEnt, W_SedSlopePlate, ED_Slope, Pi_Flow, Pi_VenaContractaOrifice, Nu_Water, E_Concrete)
    maxerror ← 0.1
    iteration ← 0
    error ← 1
    while error > maxerror
        iteration ← iteration + 1
        L_Sed ← L_SedMaxEst
        N_Ports ← floor(L_Sed/W_SedSlopePlate)
        A_Manifold ← A_FlocPort(Π_SedCell, K_PipeEnt, Q_SedSlopePort, ED_Slope, Pi_VenaContractaOrifice)*N_SedPorts*Pi_SedArea
        L_SedMaxEst ← L_MaxSed(A_SedManifold, V_SedUpBod, W_SedSlopeManifold, Π_SedCell, K_PipeEnt, W_SedSlopePlate, ED_Slope, Pi_Flow, Pi_VenaContractaOrifice, Nu_Water, E_Concrete)
        error ← |L_Sed - L_SedMaxEst|/L_SedMaxEst
    return L_SedMaxEst
L_SedMax =  # error: This variable is undefined.
Q_Sed := Q_Plant/N_SedTanks = 1000 L/min
N_SedPorts := floor(L_SedMax/W_SedSlopePlate)
A_SedSlopeManifold := A_FlocPort(Π_SedCell, K_PipeEnt, Q_SedSlopePort, ED_Slope, Pi_VenaContractaOrifice)*N_SedPorts*Pi_SedArea
H_SedSlopeManifold := 2*(A_SedSlopeManifold/W_SedSlopeManifold) = 62.1351 cm
L_SedTotal := Q_Plant/(V_SedUpBod*W_SedSingle/2) = 114.339 m
N_SedManifolds :=
    slopes ← ceil(L_SedTotal/L_SedMax)
    slopes ← slopes + 1 if round(round(slopes/2) - (slopes/2)) == 1
    return slopes
    = 20
N_SlopePairs := ceil(N_SedManifolds/(2*N_SedTanks)) = 4  # Number of pairs of slopes per sedimentation tank.
L_Sed :=
    Q_Sed/(W_SedSingle*N_SlopePairs*V_SedUpBod) if Q_Sed/(W_SedSingle*N_SlopePairs*V_SedUpBod) ≤ L_SedMax
    L_SedMax otherwise  # This should be compared to the L.SedMax value. based on rounding there should be no issue with the tank being longer than the max.
W_Sed := N_SlopePairs*W_SedSingle = 4.318 m
ND_SedPipeEntrance :=
    ND_SedPipeEntrance ← ND_SedInlet(K_El90, Q_Plant/(N_SedInletPipes*N_SedTanks), Nu_Water, G_FlocBod[last(G_FlocBod)], EN_PipeSpec) if sedlayout == 1
    ND_SedPipeEntrance ← ND_SedInlet(K_PipeExit, Q_Plant/(N_SedTanks*N_SedInletPipes), Nu_Water, G_FlocMin, EN_PipeSpec) if sedlayout == 3 or 2
    return ND_SedPipeEntrance
