# AguaClara Water Treatment Plants -- Gracias
# Automated Design
# Add variable descriptions next to every varible so it is easy to interpret what this all means.
# User Inputs:
HW_Sed := 2 m
# Design References
# [reference: UserInputs- Gracias.xmcd]
# [reference: DesignAssumptions- Gracias.xmcd]
# [reference: MathFunctions -Gracias.xmcd]
# [reference: PipeDatabase.xmcd]
# [reference: MinorLossCoefficients - Gracias.xmcd]
# [reference: FluidsFunctions - Gracias.xmcd]
# Sed Tanks and Slopes:
# [reference: Influent Sed Manifold - Gracias.xmcd]
N_SedTanks = 3
AN_SedTopInlet = 60 deg
B_SedPort = 5.85864 cm  # N.SlopePairs to N.SedBays
W_SedPort = 5.85864 cm
H_SedBetween = 7.62 cm
AN_SedBottom = 10 deg
Q_Plant = 50 L/s
N_SedPorts = 45  # per cell!
L_Sed = 9.52822 m
# We have to be clear that this is the number of cells or bays per sed tank
# Rename to N.SedCells
L_SedPort = 6.76498 cm
N_SlopePairs = 2
L_SedPort*B_SedPort = 39.6336 cm^2
L_SedPort = 6.76498 cm
W_SedSludgeFlat = 5 cm
W_SedSlopePlate = 30 cm
# Sedimentation Tank Sludge Drain:
# [reference: SludgeDrain-Gracias.xmcd]
N_SedSludge = 2  # Eliminate this variable
ND_SedSludge = 6 in
N_SedSludgeOrifices = 63  # per cell
W_SedSludge = 36.4829 cm
Time_SludgeDrain = 10 min  # Fix algorithm to make this equal to 10 minutes
H_SedSludge = 5 cm
B_SedSludgeOrifices = 15 cm
T_SedSludge = 9.33013 cm
D_SedSludgeOrifice = 0.75 in
# Sedimentation Tank Dimensions:
# [reference: Sedimentation Dimensions - Gracias.xmcd]
Z_SedSludge = 14.3301 cm
H_SedBottomSlope = 0.0765169 m
H_SedTopSlope = 0.70832 m
Z_SedSlopes = 0.951621 m
H_Sed = 2.1 m
W_Sed = 2.159 m
L_Sed = 9.52822 m
# Inlet Channel:
# [reference: Inlet Channel - Gracias.xmcd]
W_InletChannel = 0.596394 m
L_Channel = 6.927 m
# This shouldn't be ND (nominal diameter) since they aren't pipes anymore. SHould be W.SedInlet or something similar.
N_SedInletPipes = 2  # per sed cell
H_InletChannel = 0.922179 m
# Sedimentation Tank Effluent Launder:
# [reference: Launder - Gracias.xmcd]
N_SedLaunderOrifices = 162
# How many launders per cell?
# What is the spacing of the orfices?
# How many rows of orifices per launder?
Q_SedLaunderOrifices = 3.08642 L/min
B_SedLaunderOrifices = 0.1 m
# Exit Channel:
# [reference: Exit Channel - Gracias.xmcd]
ND_SedLaunder = 6 in
W_ExitChannel = 0.596394 m
H_ExitChannel = 0.922179 m
L_SedLaunder = 8.18543 m
L_ExitChannel = 6.927 m
D_SedLaunderOrifice = 0.4375 in
H_PltWeir = 0.687803 m
Z_SedLaunder = 1.87586 m
HW_ExitChannel = 0.782179 m
ZW_ExitChannel = 1.96 m
# Lamella:
# [reference: Lamella - Gracias.xmcd]
L_SedPlate = 0.812423 m
B_SedPlate = 4.50494 cm
S_SedPlate = 4.20494 cm
N_SedPlates = 148  # Number of Sed Plates per Sedimentation Tank Bay.
AN_SedPlate = 60 deg
V_SedC = 10.0065 m/day
V_SedUp = 70 m/day
H_SedPlate = 0.703579 m
H_SedAbove = 0.208275 m
# Sedimentation Tank Floc Hopper:
# [reference: Floc Hopper - Gracias.xmcd]
A_FlocHopper = 5.184 m^2
L_FlocHopper = 5.16078 m
L_FlocHopperOffset = 0.406211 m
W_FlocHopper = 1.0045 m
# Flow Controller:
# [reference: FCM - Gracias.xmcd]
N_Fcm = 6
ID_FcmTube = 4.318 mm
ID_FcmTube = 0.17 in
L_FcmTube = 257.56 cm
Q_FcmTubeMax = 375 mL/min
HL_FcmValve = 26.1265 cm
# Flocculator: | Look at Flocculator Positioning arrays
# [reference: Flocculation - Gracias -Energy Dissapation.xmcd]
W_FlocChannel = 0.719212 m
L_Sed = 9.52822 m  # Fill last channel with bafffles from last channel
# Fix port width to be based on energy dissipation in that channel
# Adjust spacing after the number of baffles per channel is known.
ED_Floc = [6.4; 1.6; 0.4] mW/kg
# Check the residence time of the flocculator should be at least 20minutes
S_FlocBaffle = [39.685; 62.9961; 100] cm
B_FlocBaffle = [40.085; 63.3961; 100.4] cm
HW_FlocEnd = 2 m
L_FlocBaffles = [
    1.60315, 1.60315, 1.37004, 1, 1;
    1.90744, 1.90744, 1.67433, 1.30429, 1.30429;
    1.60315, 1.60315, 1.37004, 1, 1;
    1.90744, 1.67433, 1.67433, 1.30429, 1.30429;
    1.60315, 1.37004, 1.37004, 1, 1;
    1.90744, 1.67433, 1.67433, 1.30429, 1.30429;
    1.60315, 1.37004, 1.37004, 1, 1;
    1.90744, 1.67433, 1.67433, 1.30429, 1.30429;
    1.60315, 1.37004, 1.37004, 0, 0;
    1.90744, 1.67433, 1.67433, 0, 0;
    1.60315, 1.37004, 1.37004, 0, 0;
    1.90744, 1.67433, 1.30429, 0, 0;
    1.60315, 1.37004, 0, 0, 0;
    1.90744, 0, 0, 0, 0;
    1.60315, 0, 0, 0, 0;
    1.90744, 0, 0, 0, 0;
    1.60315, 0, 0, 0, 0;
    1.90744, 0, 0, 0, 0;
    1.60315, 0, 0, 0, 0
] m
X_FlocBaffles = [
    8.52422, 8.51322, 8.51322, 8.51322, 8.51322;
    8.12337, 8.11237, 7.87926, 7.50922, 7.50922;
    7.72252, 7.71152, 7.2453, 6.50522, 6.50522;
    7.32167, 7.07756, 6.61134, 5.50122, 5.50122;
    6.92082, 6.4436, 5.97738, 4.49722, 4.49722;
    6.51997, 5.80964, 5.34342, 3.49322, 3.49322;
    6.11912, 5.17568, 4.70946, 2.48922, 2.48922;
    5.71827, 4.54172, 4.0755, 1.48522, 1.48522;
    5.31742, 3.90776, 3.44154, 0, 9.52822;
    4.91657, 3.2738, 2.80758, 0, 9.52822;
    4.51572, 2.63984, 2.17362, 0, 9.52822;
    4.11487, 2.00588, 1.16962, 0, 9.52822;
    3.71402, 1.37191, 9.52822, 0, 9.52822;
    3.31317, 0, 9.52822, 0, 9.52822;
    2.91232, 0, 9.52822, 0, 9.52822;
    2.51147, 0, 9.52822, 0, 9.52822;
    2.11062, 0, 9.52822, 0, 9.52822;
    1.70977, 0, 9.52822, 0, 9.52822;
    1.30892, 0, 9.52822, 0, 9.52822
] m
N_FlocChannels = 5
L_FlocTank = 47.6411 m
N_FlocBaffleSection = [21; 21; 21]
3*21 = 63
HL_Floc = 20.429 cm
HW_FlocStart = 2.20429 m
Z_FlocBaffles = [
    0, 0, 0, 0, 0;
    0.39685, 0.39685, 0.629961, 1, 1;
    0, 0, 0, 0, 0;
    0.39685, 0.629961, 0.629961, 1, 1;
    0, 0, 0, 0, 0;
    0.39685, 0.629961, 0.629961, 1, 1;
    0, 0, 0, 0, 0;
    0.39685, 0.629961, 0.629961, 1, 1;
    0, 0, 0, 0, 0;
    0.39685, 0.629961, 0.629961, 0, 0;
    0, 0, 0, 0, 0;
    0.39685, 0.629961, 1, 0, 0;
    0, 0, 0, 0, 0;
    0.39685, 0, 0, 0, 0;
    0, 0, 0, 0, 0;
    0.39685, 0, 0, 0, 0;
    0, 0, 0, 0, 0;
    0.39685, 0, 0, 0, 0;
    0, 0, 0, 0, 0
] m
W_FlocPort = 1 m
H_FlocPort = 0.6285 m
θ_Floc = 22.8427 min
# Entrance Tank:
# [reference: EntranceTankDim- Gracias.xmcd]
L_Et = 9.52822 m
W_Et = 0.719212 m
HW_EtMin = 0.2 m
HW_EtMax = 0.4 m
H_Et = 2.60429 m
ZW_Et = 2.50429 m
# Any additional needed elevations should be calculated in the files above.
# Elevations:
ZW_ExitChannel = 1.96 m  # Water Level at the end of the plant in the exit channel and exit channel box
HW_Sed = 2 m
HW_FlocStart = 2.20429 m  # Water level at the beginning of the floc tank
HL_Floc = 20.429 cm  # just for ref. the head loss throught the floc tank
ZW_Et = 2.50429 m  # the height of the water in the entrance tank.
# AutoCAD References
# [reference: basics.xmcd]
# [reference: pipe.xmcd]
# [reference: tank.xmcd]
# [reference: lamina.xmcd]
# [reference: laminaplain.xmcd]
# [reference: cross.xmcd]
# [reference: Tee.xmcd]
# [reference: elbow.xmcd]
# [reference: Sludge.xmcd]
# [reference: Channel.xmcd]
# [reference: Manifold.xmcd]
# [reference: SedTankslopes.xmcd]
# [reference: inletslope.xmcd]
# [reference: inletslopetrapezoid.xmcd]
# [reference: chemicalstock.xmcd]
# [reference: Sedimentation Tank.xmcd]
# [component: inputs SedTank]
# [reference: Flocculation Tank.xmcd]
# [component: inputs FlocTank]
# [reference: Entrance Tank.xmcd]
# [component: inputs EntranceTank]
