# [reference: FluidsFunctions.xmcd]
# The purpose of this program is to check the design of the sedimentation tank influent manifold and to determine the effect of the ratio of the Manifold to the total port area. Conventional design guidelines suggested a area ratio of 4, but that forces us to use a very large manifold with the likely consequence that more flocs will settle in the manifold. In addition a large manifold will limit the length of our sed tanks or will require the sed tanks to be deeper.
NU_Water := 1 mm^2/s
W_SedSlopePlate := 30 cm
V_SedUpBod := 70*m/day
Pi_VenaContractaOrifice := 0.63  # vena contracta for an orifice
# port spacing
W_Sed := 42.5 in
L_Sed := 4 m
E_Concrete := 2 mm  # concrete roughness (my guess), but given that head loss in the manifold is not significant, this doesn't really matter.
Q_SedSlopePort := V_SedUpBod*W_Sed/2*W_SedSlopePlate
Q_SedInlet := V_SedUpBod*W_Sed/2*L_Sed = 104.951 L/min
Pi_SedCell := 2
K_PipeEnt := 1  # for kinetic energy lost when a jet enters a reservoir (this neglects effect of the vena contracta)
ED_Slope := 0.4*mW/kg  # Max allowed to prevent floc breakup
AN_SedTopInlet := 60 deg
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A_SedPort(Pi_SedCell, K_PipeEnt, Q_SedSlopePort, ED_Slope, Pi_VenaContractaOrifice) := 1/Pi_VenaContractaOrifice*(K_PipeEnt*Q_SedSlopePort^3/(2*Pi_SedCell*ED_Slope))^(2/7)
# increase the area of the port to account for the vena contracta
B_SedPort := sqrt(A_SedPort(Pi_SedCell, K_PipeEnt, Q_SedSlopePort, ED_Slope, Pi_VenaContractaOrifice)) = 0.0685462 m  # Ports are assumed square here.
L_SedPort := B_SedPort/sin(AN_SedTopInlet) = 0.0791503 m  # The cut length is adjusted for the angle of the plate.
W_SedPort := B_SedPort = 0.0685462 m  # Width is set to make the smallest area the water travels through square.
# The following program estimates the head required to provide the flow through the ports and then calculates the flow through every port while keeping track of the changes in the hydraulic grade line.  It then compares the calculated total flow to the desired manifold flow and applies a correction factor
# and then recalculates.
# From the graph below it can be seen that the Pi.SedArea ratio term should be some where between 1.5 and 2 in order to get about an 85 to 90% flow ratio.
Q_SedSlopePorts(A_SedManifold, V_SedUpBod, W_Sed, L_Sed, Pi_SedCell, K_PipeEnt, W_SedSlopePlate, ED_Slope, Pi_SedArea, Pi_VenaContractaOrifice, NU_Water, E_Concrete) :=
    n_Ports ← floor(L_Sed/W_SedSlopePlate)
    Q_SedSlopePort ← V_SedUpBod*W_Sed/2*W_SedSlopePlate
    A_Port ← A_SedPort(Pi_SedCell, K_PipeEnt, Q_SedSlopePort, ED_Slope, Pi_VenaContractaOrifice)
    Q_SedInlet ← V_SedUpBod*W_Sed/2*L_Sed
    D_Manifold ← D_circle(A_SedManifold)
    V[0] ← Q_SedInlet/A_SedManifold
    Q_m[0] ← Q_SedInlet
    H_m[0] ← 1/(2*g)*(Q_SedInlet/(n_Ports*Pi_VenaContractaOrifice*A_Port))^2 - V[0]^2/(2*g)
    maxerror ← 0.00001
    error ← 1
    while error > maxerror
        for i ∈ 0 .. n_Ports - 1
            Q_p[i] ← Pi_VenaContractaOrifice*A_Port*sqrt(2*g*H_m[i])
            V[i + 1] ← max(V[i] - Q_p[i]/A_SedManifold, 0.000000001*m/s)
            Q_m[i + 1] ← A_SedManifold*V[i + 1]
            ΔH_Exp ← (V[i] - V[i + 1])*V[i + 1]/g
            H_m[i + 1] ← H_m[i] + V[i]^2/(2*g) - V[i + 1]^2/(2*g) + ΔH_Exp - h_f(Q_m[i + 1], D_Manifold, W_SedSlopePlate, NU_Water, E_Concrete)
        error ← ((Q_SedInlet/sum(Q_p))^2 - 1)^2
        H_m[0] ← H_m[0]*(Q_SedInlet/sum(Q_p))^2
    return Q_p
# pressure recovery dominates the flow in the manifold and thus to get a decent initial prediction of the required head at the beginning of the manifold we subtract the velocity head. This ends up giving a very good first guess.
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# Port velocity head term - manifold velocity head term
# This prevents the flow from every going backwards in the manifold. When the correct initial head is attained this minimum flow won't be applied anymore. It is needed if the initial head is too low.
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# Use major losses only in manifold
# The following function calculates the area of the manifold given a ratio between the manifold area and the total port area. This will be used in the graphs below to show how the port flows vary.
Q_p(Pi_SedArea) :=
    n_Ports ← floor(L_Sed/W_SedSlopePlate)
    Q_SedSlopePort ← V_SedUpBod*W_Sed/2*W_SedSlopePlate
    A_Port ← A_SedPort(Pi_SedCell, K_PipeEnt, Q_SedSlopePort, ED_Slope, Pi_VenaContractaOrifice)
    A_SedManifold ← n_Ports*A_Port*Pi_SedArea
    Q_SedSlopePorts(A_SedManifold, V_SedUpBod, W_Sed, L_Sed, Pi_SedCell, K_PipeEnt, W_SedSlopePlate, ED_Slope, Pi_SedArea, Pi_VenaContractaOrifice, NU_Water, E_Concrete)
N_SedPorts := floor(L_Sed/W_SedSlopePlate)
j := 0 .. N_SedPorts - 1
L_manifold[j] := j*W_SedSlopePlate
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# A graph showing the port flows as a function of the location in the manifold. Note that because of the dominance of pressure recovery, that the last ports have the highest flow rates. Also note that even for a area ratio of 1 that the flow distribution isn't really that bad. In our sedimentation tanks it is possible that non uniform flow out of the manifold can partially be corrected by the floc blanket. But non uniform flow means that we may be breaking up more flocs at the end of the manifold.
# It would be possible to improve manifold performance by tapering the passage to maintain a constant velocity in the manifold. This would be an improvement for many reasons including a reduction in the sedimentation of flocs in the manifold.
# Takes the minimum flow port and divides it by the maximum flow port.
Q_ratio(Pi_SedArea) := min(Q_p(Pi_SedArea))/max(Q_p(Pi_SedArea))
Pi_SedArea := 1, 1.05 .. 4
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# This graph shows the relationship between the area ratio and the flow ratio of the min and max ports. This analysis suggest that even with a manifold area ratio as low as 1.5 we could still get reasonably good flow distribution in the sedimentation tank.
# The next step is be to create a function that returns the manifold area (or the maximum length of a sed tank given a manifold area) and given a desired port flow ratio.
L_MaxSed(A_SedManifold, V_SedUpBod, W_Sed, Pi_SedCell, K_PipeEnt, W_SedSlopePlate, ED_Slope, Pi_Flow, Pi_VenaContractaOrifice, NU_Water, E_Concrete) :=
    Pi_SedArea ← 2
    Q_SedSlopePort ← V_SedUpBod*W_Sed/2*W_SedSlopePlate
    A_Port ← A_SedPort(Pi_SedCell, K_PipeEnt, Q_SedSlopePort, ED_Slope, Pi_VenaContractaOrifice)
    L_Sed ← A_SedManifold/A_Port*W_SedSlopePlate/Pi_SedArea
    Q_Ports ← Q_SedSlopePorts(A_SedManifold, V_SedUpBod, W_Sed, L_Sed, Pi_SedCell, K_PipeEnt, W_SedSlopePlate, ED_Slope, Pi_SedArea, Pi_VenaContractaOrifice, NU_Water, E_Concrete)
    Pi_FlowActual ← min(Q_Ports)/max(Q_Ports)
    maxerror ← 0.01
    error ← 1
    iteration ← 0
    L_SedNew ← L_Sed
    while error > maxerror
        iteration ← iteration + 1
        L_Sed ← L_SedNew
        Q_Ports ← Q_SedSlopePorts(A_SedManifold, V_SedUpBod, W_Sed, L_Sed, Pi_SedCell, K_PipeEnt, W_SedSlopePlate, ED_Slope, Pi_SedArea, Pi_VenaContractaOrifice, NU_Water, E_Concrete)
        Pi_FlowActual ← min(Q_Ports)/max(Q_Ports)
        error ← |(Pi_FlowActual - Pi_Flow)/(Pi_FlowActual + Pi_Flow)|
        L_SedNew ← L_Sed*(Pi_FlowActual/Pi_Flow)^1
        trace("For iteration {0}, Pi.FlowActual = {1}, L.Sed={2}, L.SedNew={3}", iteration, Pi_FlowActual, L_Sed, L_SedNew)
    return L_SedNew  # intial guess on area ratio
# First assume area ratio of 2, to get initial length of sed tank. Then calculate Pi.Flow and iterate to converge on the target Pi.Flow.
# It is important that this max error be less stringent than the function that it calls (Q.Ports), otherwise this function will oscillate.
# The power relationship was a guess based on trial and error. Higher powers tended to overshoot the solution.
# The trace line can be used to print intermediate results from the loop to see if it is converting (Debug option)
Pi_SedArea := 2
A_SedManifold := A_SedPort(Pi_SedCell, K_PipeEnt, Q_SedSlopePort, ED_Slope, Pi_VenaContractaOrifice)*N_SedPorts*Pi_SedArea
Pi_Flow := 0.75  # Limit Pi.Flow to a value between 0.5 and 0.9999
L_MaxSed(A_SedManifold, V_SedUpBod, W_Sed, Pi_SedCell, K_PipeEnt, W_SedSlopePlate, ED_Slope, Pi_Flow, Pi_VenaContractaOrifice, NU_Water, E_Concrete) = 6.92893 m
# This function can be called to determine the maximum length of a sedimentation tank given the manifold cross sectional area.
