# Inlet Channel Design
# [reference: UserInputs- 1m deep.xmcd]
# [reference: DesignAssumptions-1m deep.xmcd]
# [reference: MathFunctions.xmcd]
# [reference: PipeDatabase.xmcd]
# [reference: MinorLossCoefficients.xmcd]
# [reference: FluidsFunctions.xmcd]
OD_SedPlateFrame := 2*ConRadius(ND_SedPlateFrame) = 2.85 in
HW_InletChannel := HW_Sed*Pi_BottomHWSed - OD_SedPlateFrame - T_ChannelWall = 0.37761 m
H_InletChannel := HW_InletChannel + H_PlantFreeboard = 0.47761 m
L_Channel := N_SedTanks*(W_Sed + T_PlantWall)  # The length is based on the side of the sed tank
# The water height in the plant leveling tank is determined by the water level in the
# channel and the freeboard.
W_ChannelG := (1/G_FlocBod[last(G_FlocBod)])^(1/2)*(Q_Plant/HW_InletChannel)^(3/4)*(K_El90/(2*Nu_Water*Pi_FlocDissipation))^(1/4)
# Use the G from the last section of the flocculator
# The width of the channel is a function of the Gcell average we want to maintain the losses from 90 degree turns and the energy dissapation zone (Π_cell)
# Size of the pipes entering the Sedimentation Tank.
ND_SedPipeEntrance :=
    ND_SedPipeEntrance ← ND_SedInlet(K_El90, Q_Plant/(N_SedInletsPipes*N_SedTanks), Nu_Water, G_FlocBod[last(G_FlocBod)], EN_PipeSpec) if sedlayout == 1
    ND_SedPipeEntrance ← ND_SedInlet(K_PipeExit, Q_Plant/(N_SedTanks*N_SedInletPipes), Nu_Water, G_FlocMin, EN_PipeSpec) if sedlayout == 3
    return ND_SedPipeEntrance  # error: This variable is undefined.
ND_SedPipe := ND_SedInlet(K_El90, Q_Plant/(N_SedInletsPipes*N_SedTanks), Nu_Water, G_FlocBod[last(G_FlocBod)], EN_PipeSpec)  # error: This variable is undefined.
# The width of the channel is based on the necessity to be at least as great as the width determined with G, but also must be wide enough to fit sed inlet pipes.  This W.channel chooses the larger choice to fulfill both needs.
W_InletChannel := max(W_ChannelG, outerdiameter(ND_SedPipeEntrance))  # error: This variable is undefined.
