# Lamella Design
# [reference: UserInputs- 1m deep.xmcd]
# [reference: DesignAssumptions-1m deep.xmcd]
# [reference: MathFunctions.xmcd]
# [reference: PipeDatabase.xmcd]
# [reference: MinorLossCoefficients.xmcd]
# [reference: FluidsFunctions.xmcd]
# [reference: Inlet Channel.xmcd]
# [reference: Sedimentation.xmcd]
# [reference: Launder.xmcd]
# [reference: Exit Channel.xmcd]
L_SedInactive := (L_SedPlate*cos(AN_SedPlate) + W_InletChannel + W_ExitChannel + 2*T_ChannelWall) = 1.30483 m  # Inactive Area of the sedimentation Tank
# Calculate minimum number of plate settlers
V_SedUpActiveBelow := Q_Sed/(W_Sed*(L_Sed - L_SedInactive)) = 108.719 m/day
b := -(L_SedPlate*sin(AN_SedPlate)*cos(AN_SedPlate) - T_SedPlate)
a := 1 - V_SedUpActiveBelow/V_SedCBod
c := T_SedPlate*L_SedPlate*sin(AN_SedPlate)*cos(AN_SedPlate)
B_SedPlate := (b + sqrt(b^2 - 4*a*c))/(2*a) = -0.272799 cm
S_SedPlate := L_SedPlate*cos(AN_SedPlate)*sin(AN_SedPlate)/(V_SedUpActiveBelow/V_SedCBod - 1) = 2.43114 cm
# The space between the lamella
L_SedActiveMax := L_Sed - L_SedInactive = 2.359 m  # Note this doesn't include the area occupies by the thickness of the plate settlers
# This is the minimum length of the sed tank to get the active upward velocity
# Number of spaces where water is traveling is one less than the number of plates used to create those spaces
N_SedPlatesMin := ceil(L_SedActiveMax*sin(AN_SedPlate)/B_SedPlate) + 1 = -747
V_SedUpActiveMax := Q_Sed/(W_Sed*(L_Sed - L_SedInactive - N_SedPlatesMin*T_SedPlate/sin(AN_SedPlate))) = 51.8464 m/day
L_Sed := max(L_Sed, L_SedInactive + ((N_SedPlatesMin*T_SedPlate + (N_SedPlatesMin - 1)*(S_SedPlate - T_SedPlate))/sin(AN_SedPlate))) = 3.66383 m
# Now calculate actual values of all parameters!
# This is the active legnth of the sedimentation tank.not including the thickness of the plates.
# The B value here is from center to center for the baffles.
N_SedPlates := floor((L_Sed - L_SedInactive - T_SedPlate/sin(AN_SedPlate))*sin(AN_SedPlate)/S_SedPlate + 1) = 84
# There is one extra baffle than space between baffles.  because of the extra baffles has to be
# subtracted from the estimated active length of the sed tank.
L_SedActive := L_Sed - L_SedInactive - N_SedPlates*T_SedPlate/sin(AN_SedPlate) = 2.06802 m
V_SedUp := Q_Sed/(L_Sed*W_Sed) = 70 m/day
V_SedUpActive := Q_Sed/(L_SedActive*W_Sed) = 124.016 m/day
V_SedC := V_SedUpActive/(1 + L_SedPlate/(S_SedPlate - T_SedPlate)*cos(AN_SedPlate)*sin(AN_SedPlate)) = 10.1143 m/day
