# Launderer Design
# 1. Equally divide the flow from the plant into each sedimentation tank.
# 2. Calculate the number of orifices using an equal spacing on the length of the launder.
# 3. The flow through each orifice is the flow in the tank divided by the number of orifices.
# 4. The elevation of the manifold launder should be placed in the middle of the water depth above the lamella in the sedimentation tank.
# 5. Find the length of the longest and shortest launders to the plant leveling tank.
# 6. Using an iterative program, and the available pipe sizes from the pipe database, the launder diameter is determined with a function from fluids functions
# 7.Sum the number of bends in the launder piping
# 8. Use function to find equal flow between parallel pipes.
# 9. The diameter of the launder is the max value of 6 and 8.
# 10. Calculate the total headloss in the launder.
# 11. Calculate the total headloss in the orifice.
# 12. Use orifice equation to find diameter of orifice holes.
# The launder will be located between the top of the lamella and the surface of the water in the sedimentation tank, the orifices will be at the center of the launders
# Add solution method description
# [reference: UserInputs- 1m deep.xmcd]
# [reference: DesignAssumptions-1m deep.xmcd]
# [reference: MathFunctions.xmcd]
# [reference: PipeDatabase.xmcd]
# [reference: MinorLossCoefficients.xmcd]
# [reference: FluidsFunctions.xmcd]
# [reference: Inlet Channel.xmcd]
# [reference: Sedimentation.xmcd]
# [reference: Sed. Inlet Slopes.xmcd]
L_SedLaunderEst := L_Sed - 2*W_InletChannel - T_ChannelWall = 1.93565 m
# 2.
N_SedLaunderOrifices := 2*floor(L_SedLaunderEst/B_SedLaunderOrifices) = 38
# 3.
Q_SedLaunderOrifices := Q_Sed/N_SedLaunderOrifices = 5.55556e-5 m^3/s
# 4.
Z_SedLaunder := HW_Sed - H_SedAbove/2 = 1.14 m
# 6.
K_SedLaunder := K_Sum(0, N_ElLaunder, 0, 0, 0, 0, 0, 0, 0)
# 7.
ND_SedLaunderEst := ND_Manifold(Q_Sed, HL_SedLaunderBod, L_SedLaunderEst, Pi_QLaunderOrifices, EN_PipeSpec, Nu_Water, E_Pvc, K_SedLaunder, N_SedLaunderOrifices) = 4 in
# 10.
HL_SedLaunderEst := HL_Manifold(Q_Sed, ND_SedLaunderEst, L_SedLaunderEst, 0, Nu_Water, E_Pvc, N_SedLaunderOrifices) = 0.0619082 cm
# 11.
HL_SedLaunderOrificeEst := HL_SedLaunderBod - HL_SedLaunderEst = 9.93809 cm
# 12.
D_SedLaunderOrificeEst := RoundNearest(D_circle(A_orifice(HL_SedLaunderOrificeEst, Pi_VenaContractaOrifice, Q_SedLaunderOrifices)), D_Drill) = 9 mm
# Currently HL.launder is used up and thus the water level in the plant level tank is HL.launder below the sed tank.
# If we round up to the next available drill bit diameter the head loss will drop slightly. We could then calculate a new actual total headloss. For now ...
