# AguaClara Water Treatment Plants
# Automated Design
# User Inputs:
HW_Sed := 3.12 m
# Design References
# [reference: UserInputs- test.xmcd]
# [reference: DesignAssumptions-test.xmcd]
# [reference: MathFunctions.xmcd]
# [reference: PipeDatabase.xmcd]
# [reference: MinorLossCoefficients.xmcd]
# [reference: FluidsFunctions.xmcd]
# Inlet Channel:
# [reference: Inlet Channel.xmcd]
W_InletChannel = 0.733389 m
L_Channel = 9.236 m
ND_SedPipeEntrance = 12 in
N_SedInletPipes = 8
H_InletChannel = 1.1 m
Q_Plant = 800 gal/min
# Sedimentation Tanks:
# [reference: Sedimentation.xmcd]
N_SedTanks = 4
H_SedBelowSlope = 0.8016 m
H_SedBelowStraight = 0.1016 m
H_SedBetween = 0.1016 m
HW_Sed = 3.12 m
H_Sed = 3.22 m
H_SedBelow = 0.9032 m
L_Sed = 7.21365 m
ND_SedPipeEntrance = 12 in
# Sedimentation Tank Sludge Drain:
# [reference: SludgeDrain.xmcd]
N_SedSludgeOrifices = 72
ND_SedSludge = 6 in
Q_SludgeDrainInitial = 3239.45 L/min
D_SedSludgeOrifice = 0.25 in
# Sedimentation Tank Inlet Slopes:
# [reference: Sed. Inlet Slopes.xmcd]
B_SedInlet = 6.395 cm
H_SedInlet = 8.34807 cm
AN_SedTopInlet = 60 deg
AN_SedBottom = 10 deg
L_SedTopInlet = 2.159 m
A_SedInlet = 9064.58 cm^2
H_SedTopInlet = 186.975 cm
H_SedInletSlopes = 1.96975 m
H_SedBottom = 0.190345 m
# Sedimentation Tank Effluent Launder:
# [reference: Launder.xmcd]
N_SedLaunderOrifices = 110
Q_SedLaunderOrifices = 3.44128 L/min
# Exit Channel:
# [reference: Exit Channel.xmcd]
W_ExitChannel = 0.733389 m
ND_SedLaunder = 6 in
H_ExitChannel = 1.1 m
L_SedLaunder = 5.59687 m
L_ExitChannel = 9.236 m
D_SedLaunderOrifice = 0.5 in
H_PltWeir = 0.865031 m
Z_SedLaunder = 2.99586 m
HW_ExitChannel = 0.96 m
# Lamella:
# [reference: Lamella.xmcd]
L_SedPlate = 1.0877 m
B_SedPlate = 5.03274 cm
S_SedPlate = 4.73274 cm
N_SedPlates = 86
AN_SedPlate = 60 deg
V_SedC = 10.0123 m/day
V_SedUp = 70 m/day
H_SedPlate = 0.941976 m
H_SedAbove = 0.208275 m
# Flow Controller:
# [reference: FCM.xmcd]
N_Fcm = 6
ID_FcmTube = 4.318 mm
ID_FcmTube = 0.17 in
L_FcmTube = 255.151 cm
Q_FcmTubeMax = 378.541 mL/min
HL_FcmValve = 26.6223 cm
# Flocculator:
# [reference: Flocculation.xmcd]
W_FlocChannel = 1.0795 m
S_FlocBaffle = [0.229659; 0.274731; 0.364221; 0.935701] m
B_FlocBaffle = [0.233659; 0.278731; 0.368221; 0.939701] m
N_FlocBafflesMin = 27
HL_Floc = 8.31788 cm
X_FlocBaffles = [
    1.2295, 6.26295, 0.950701;
    1.46316, 5.32325, 1.8904;
    1.69682, 4.38354, 2.8301;
    1.93048, 3.44384, 3.76981;
    2.16414, 2.50414, 4.70951;
    2.39779, 1.56444, 5.64921;
    2.67653, 0, 0;
    2.95526, 0, 0;
    3.23399, 0, 0;
    3.51272, 0, 0;
    3.79145, 0, 0;
    4.15967, 0, 0;
    4.52789, 0, 0;
    4.89611, 0, 0;
    5.26434, 0, 0;
    5.63256, 0, 0;
    6.57226, 0, 0
] m
HW_FlocStart = 3.20318 m
W_FlocPort = 0.935701 m
L_FlocBaffles = [
    2.89034, 2.1843, 2.1843;
    2.99034, 2.2843, 2.2843;
    2.89034, 2.1843, 2.1843;
    2.99034, 2.2843, 2.2843;
    2.89034, 2.1843, 2.1843;
    2.99034, 2.2843, 2.2843;
    2.84527, 0, 0;
    2.94527, 0, 0;
    2.84527, 0, 0;
    2.94527, 0, 0;
    2.84527, 0, 0;
    2.85578, 0, 0;
    2.75578, 0, 0;
    2.85578, 0, 0;
    2.75578, 0, 0;
    2.85578, 0, 0;
    2.1843, 0, 0
] m
H_FlocPort = 1.0795 m
N_FlocBaffles = 29
Z_FlocBaffles = [
    0, 0, 0;
    0.229659, 0.935701, 0.935701;
    0, 0, 0;
    0.229659, 0.935701, 0.935701;
    0, 0, 0;
    0.229659, 0.935701, 0.935701;
    0, 0, 0;
    0.274731, 0, 0;
    0, 0, 0;
    0.274731, 0, 0;
    0, 0, 0;
    0.364221, 0, 0;
    0, 0, 0;
    0.364221, 0, 0;
    0, 0, 0;
    0.364221, 0, 0;
    0, 0, 0
] m
Gt_FlocMinFlow = 7679.95
N_FlocChannels = 3
# Entrance Tank:
# [reference: EntranceTank.xmcd]
ND_Lfom = 20 in
HL_Rm = 0.890191 cm
N_Lfom = 1
D_LfomOrifices = 52.3875 mm
Q_LfomErrorMax = 0.74575 %
N_LfomOrifices = [5; 4; 3; 2; 2; 2; 1; 2; 1; 1]
L_Et = 1.0795 m
W_Et = 1.0795 m
HW_EtMin = 0.2 m
HW_EtMax = 0.4 m
H_Et = 0.5 m
ZW_Et = 3.45318 m
# Any additional needed elevations should be calculated in the files above.
# AutoCAD References
# [reference: basics.xmcd]
# [reference: pipe.xmcd]
# [reference: tank.xmcd]
# [reference: lamina.xmcd]
# [reference: cross.xmcd]
# [reference: Tee.xmcd]
# [reference: elbow.xmcd]
# [reference: Sludge.xmcd]
# [reference: Channel.xmcd]
# [reference: Manifold.xmcd]
# [reference: SedTankslopes.xmcd]
# [reference: Sed Tank Inlet Slope.xmcd]
# [reference: chemicalstock.xmcd]
# [reference: Sedimentation Tank.xmcd]
# [component: inputs SedTank]
# [reference: Flocculation Tank.xmcd]
# [component: inputs FlocTank]
# [reference: Entrance Tank.xmcd]
# [component: inputs EntranceTank]
