# AguaClara Water Treatment Plants
# Automated Design
# User Inputs:
HW_Sed := 3.75 m
# Design References
# [reference: UserInputs- test.xmcd]
# [reference: DesignAssumptions-test.xmcd]
# [reference: MathFunctions.xmcd]
# [reference: PipeDatabase.xmcd]
# [reference: MinorLossCoefficients.xmcd]
# [reference: FluidsFunctions.xmcd]
# Inlet Channel:
# [reference: Inlet Channel.xmcd]
W_InletChannel = 0.733389 m
L_Channel = 13.854 m
ND_SedPipeEntrance = 12 in
N_SedInletPipes = 6
H_InletChannel = 1.1 m
Q_Plant = 800 gal/min
# Sedimentation Tanks:
# [reference: Sedimentation.xmcd]
N_SedTanks = 6
H_SedBelowSlope = 0.8016 m
H_SedBelowStraight = 0.0762 m
H_SedBetween = 0.0762 m
HW_Sed = 3.75 m
H_Sed = 3.85 m
H_SedBelow = 0.8778 m
L_Sed = 4.8091 m
ND_SedPipeEntrance = 12 in
# Sedimentation Tank Sludge Drain:
# [reference: SludgeDrain.xmcd]
N_SedSludgeOrifices = 48
ND_SedSludge = 4 in
Q_SludgeDrainInitial = 2595.71 L/min
D_SedSludgeOrifice = 0.25 in
# Sedimentation Tank Inlet Slopes:
# [reference: Sed. Inlet Slopes.xmcd]
B_SedInlet = 6.395 cm
H_SedInlet = 8.34807 cm
AN_SedTopInlet = 60 deg
AN_SedBottom = 10 deg
L_SedTopInlet = 2.159 m
A_SedInlet = 9064.58 cm^2
H_SedTopInlet = 186.975 cm
H_SedInletSlopes = 1.96975 m
H_SedBottom = 0.190345 m
# Sedimentation Tank Effluent Launder:
# [reference: Launder.xmcd]
N_SedLaunderOrifices = 62
Q_SedLaunderOrifices = 4.07034 L/min
# Exit Channel:
# [reference: Exit Channel.xmcd]
W_ExitChannel = 0.733389 m
ND_SedLaunder = 6 in
H_ExitChannel = 1.1 m
L_SedLaunder = 3.19232 m
L_ExitChannel = 13.854 m
D_SedLaunderOrifice = 0.5 in
H_PltWeir = 0.865031 m
Z_SedLaunder = 3.62586 m
HW_ExitChannel = 0.96 m
# Lamella:
# [reference: Lamella.xmcd]
L_SedPlate = 1.81516 m
B_SedPlate = 5.3014 cm
S_SedPlate = 5.0014 cm
N_SedPlates = 36
AN_SedPlate = 60 deg
V_SedC = 10.0194 m/day
V_SedUp = 70 m/day
H_SedPlate = 1.57198 m
H_SedAbove = 0.208275 m
# Flow Controller:
# [reference: FCM.xmcd]
N_Fcm = 6
ID_FcmTube = 4.318 mm
ID_FcmTube = 0.17 in
L_FcmTube = 255.151 cm
Q_FcmTubeMax = 378.541 mL/min
HL_FcmValve = 26.6223 cm
# Flocculator:
# [reference: Flocculation.xmcd]
W_FlocChannel = 1.0795 m
S_FlocBaffle = [0.229659; 0.274731; 0.364221; 0.935701] m
B_FlocBaffle = [0.233659; 0.278731; 0.368221; 0.939701] m
N_FlocBafflesMin = 27
HL_Floc = 8.31788 cm
X_FlocBaffles = [
    1.2295, 3.8584, 0.950701, 3.8584;
    1.46316, 3.49018, 1.8904, 2.9187;
    1.69682, 3.12195, 2.8301, 1.97899;
    1.93048, 2.75373, 3.76981, 1.03929;
    2.16414, 2.38551, 0, 0;
    2.39779, 2.01729, 0, 0;
    2.67653, 1.07759, 0, 0;
    2.95526, 0, 0, 0;
    3.23399, 0, 0, 0;
    3.51272, 0, 0, 0;
    3.79145, 0, 0, 0
] m
HW_FlocStart = 3.83318 m
W_FlocPort = 0.935701 m
L_FlocBaffles = [
    3.52034, 3.47527, 2.8143, 2.8143;
    3.62034, 3.48578, 2.9143, 2.9143;
    3.52034, 3.38578, 2.8143, 2.8143;
    3.62034, 3.48578, 2.9143, 2.9143;
    3.52034, 3.38578, 0, 0;
    3.62034, 3.48578, 0, 0;
    3.47527, 2.8143, 0, 0;
    3.57527, 0, 0, 0;
    3.47527, 0, 0, 0;
    3.57527, 0, 0, 0;
    3.47527, 0, 0, 0
] m
H_FlocPort = 1.0795 m
N_FlocBaffles = 26
Z_FlocBaffles = [
    0, 0, 0, 0;
    0.229659, 0.364221, 0.935701, 0.935701;
    0, 0, 0, 0;
    0.229659, 0.364221, 0.935701, 0.935701;
    0, 0, 0, 0;
    0.229659, 0.364221, 0, 0;
    0, 0, 0, 0;
    0.274731, 0, 0, 0;
    0, 0, 0, 0;
    0.274731, 0, 0, 0;
    0, 0, 0, 0
] m
Gt_FlocMinFlow = 6885.47
N_FlocChannels = 4
# Entrance Tank:
# [reference: EntranceTank.xmcd]
ND_Lfom = 20 in
HL_Rm = 0.890191 cm
N_Lfom = 1
D_LfomOrifices = 52.3875 mm
Q_LfomErrorMax = 0.74575 %
N_LfomOrifices = [5; 4; 3; 2; 2; 2; 1; 2; 1; 1]
L_Et = 1.0795 m
W_Et = 1.0795 m
HW_EtMin = 0.2 m
HW_EtMax = 0.4 m
H_Et = 0.5 m
ZW_Et = 4.08318 m
# Any additional needed elevations should be calculated in the files above.
# AutoCAD References
# [reference: basics.xmcd]
# [reference: pipe.xmcd]
# [reference: tank.xmcd]
# [reference: lamina.xmcd]
# [reference: cross.xmcd]
# [reference: Tee.xmcd]
# [reference: elbow.xmcd]
# [reference: Sludge.xmcd]
# [reference: Channel.xmcd]
# [reference: Manifold.xmcd]
# [reference: SedTankslopes.xmcd]
# [reference: Sed Tank Inlet Slope.xmcd]
# [reference: chemicalstock.xmcd]
# [reference: Sedimentation Tank.xmcd]
# [component: inputs SedTank]
# [reference: Flocculation Tank.xmcd]
# [component: inputs FlocTank]
# [reference: Entrance Tank.xmcd]
# [component: inputs EntranceTank]
