# AguaClara Water Treatment Plants
# Automated Design
# User Inputs:
# Engineer Entered Values: | Values used to Draw Plant:
tank_thick = 0.15
Q_plant = 0.01
lvltank_thick = 0.15
# sed tank parameters
stockplat_thick := lvltank_thick
beta = 0.523599
grit_thick := lvltank_thick
SedTank_width = 0.9  # Width of the lamella
platform_thick = 0.3
L_lamella = 0.9
# length of the lamella
channel_thick = 0.15
lamella_spacing = 0.05  # lamella spacing
walkway_width = 1
PipeSpecification = 3
DrillSeries = 0
Q_plant := Q_plant*m^3/sec = 600 L/min
tank_thick := tank_thick*m = 0.15 m
beta := beta*rad = 30 deg
lvltank_thick := lvltank_thick*m = 0.15 m
SedTank_width := SedTank_width*m = 0.9 m
stockplat_thick := stockplat_thick*m = 0.15 m
L_lamella := L_lamella*m = 0.9 m
grit_thick := grit_thick*m = 0.15 m
lamella_spacing := lamella_spacing*m = 5 cm
platform_thick := platform_thick*m = 0.3 m
channel_thick := channel_thick*m = 0.15 m
walkway_width := walkway_width*m = 1 m
# Design References
# [reference: DesignAssumptions.xmcd]
# [reference: PipeDatabase.xmcd]
# [reference: FluidsFunctions.xmcd]
# [reference: Pipe Design and minor loss coefficients.xmcd]
# [reference: Channel design.xmcd]
# [reference: Chemical Feed.xmcd]
# [reference: Flocculation Function.xmcd]
# [reference: GritChamber.xmcd]
# [reference: Launder.xmcd]
# [reference: Plant Elevation Design.xmcd]
# [reference: plantleveltank.xmcd]
# [reference: Sedimentation Function.xmcd]
# [reference: Sludge Drain Design Program.xmcd]
r_drum = 0.3 m
# Calls Functions Here:
# Chemical Feed Design
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Q_alum := ChemicalFeed(Q_plant) = 300 mL/min
# Channel Design
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Channel_dim := Channel(Q_plant, SedTank_width, tank_thick) = [3; 0.379455; 0.7] m
# Sedimentation Tank Design
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pipediameter := 6 in
SedTank := SedTankDesign(Q_plant, SedTank_width, lamella_spacing, L_lamella, beta, Channel_dim, n_sedtanks, spacebelow_total, ratio_waterdepthtolaunderspacing, α, freeboard_sed, v_up, HW_channel, spacingratio, pipediameter, criticalvelocity_toobig) = [[3.65; 0.9; 2.10442], 48, 2.00442, 1.40442, 0.00013161, 0.225, 0.740192]
[sedtank_dim, N_lamella, water_depth, z_plat, v_c, spaceabove] := SedTank
SedTank = [[3.65; 0.9; 2.10442], 48, 2.00442, 1.40442, 0.00013161, 0.225, 0.740192]
sedtank_dim := SedTank[:, 0][0]*m = [3.65; 0.9; 2.10442] m
N_lamella := SedTank[0, 1] = 48
water_depth := SedTank[0, 2]*m = 2.00442 m
z_plat := SedTank[0, 3]*m = 1.40442 m
v_c := SedTank[0, 4]*m/s = 11.3711 m/day
spaceabove := SedTank[0, 5]*m = 0.225 m
# Flocculator Design
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# The baffle positions are reported in the following way:
# There is one matrix for each channel. The first column is the x position
# of the baffle. The 2nd column is the starting y position of a baffle (ie top of the tank (0),
# or bottom of tank), the 3rd column is the final position of the baffle.
# Therefore a baffle at position x extends between the two y coordinates.
Flocculator := flocculator(Q_plant, sedtank_dim)
floc_dim := Flocculator[0, 0]*m
baffle_spacing := Flocculator[0, 1]*m
tot_baffle := Flocculator[0, 2]
total_hl := Flocculator[0, 3]*m
uturnhole_dim := Flocculator[0, 4]*m
[floc_dim/m, baffle_spacing/m, tot_baffle, total_hl/m, uturnhole_dim/m, baffle_length/m, baffle_positions, Gθ_newmin, length_duetobaffles/m]  # disabled
# Grit Chamber Design
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Grit := gritchamber(Q_plant, PipeSpecification, DrillSeries, lamella_spacing, L_lamella, beta, Channel_dim, SedTank[:, 0][0]*m, SedTank[:, 2][0]*m, Flocculator[:, 3][0]*m)
Grit =  # error: This variable is undefined.
# Launderer Design
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Laund := Launder(Q_plant, PipeSpecification, SedTank[:, 0][0][0]*m, lamella_spacing, SedTank[:, 2][0]*m, SedTank[:, 5][0]*m, Channel_dim[1], SedTank[:, 0][0][1]*m, platform_thick, walkway_width) = [3.65, 0.0474594, 0.1, 1.89192, 0.00352363, 72, 8.79816e-5, 0.38735, 0.209487, 0.2032]
# Sludge Pipe Design
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SludgePipe := Sludge(Q_plant, PipeSpecification, SedTank[:, 0][0][0]*m, lamella_spacing, SedTank_width, SedTank[:, 2][0]*m) = [0.0508, 0.0059308, 0.1]
[D_sludgedrain/m, D_orifice/m, L_sludgeports/m]
# Plant Leveling Tank
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PLT := PlantLevelingTank(Q_plant, PipeSpecification, Laund[:, 4][0]*m, Laund[:, 6][0]*m) = [[0.0664612; 0.603524; 0.7], 0.0762, 0.499912, 0.599912] m
# Plant Elevation Design
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Z_elevation := PlantElevations(Q_plant, Grit, Laund, SedTank, Q_alum, PLT[:, 2][0], PLT[:, 1][0], Flocculator[:, 3][0]*m, L_lamella, 10 cm)
# Constructing Tables of Parameters:
# Defining components of Output Arrays:
[sedtank_dim, N_lamella, water_depth, z_plat, v_c, spaceabove] := SedTank
[floc_dim, baffle_spacing, tot_baffle, floctotal_hl, uturnhole_dim, baffle_length, baffle_positions, Gθ_newmin, length_duetobaffles] := Flocculator
[SedPipe_length, D_laundOrf, laundOrf_dist, manifold_elevation, HL_laundertotal, n_laundOrf, h_laundOrf, offfloor_length, Pipe9_length, D_launder] := Laund
[waste_ind, D_sludgeOrf, sludgeOrf_dist] := SludgePipe
[lvltank_dim, D_weir, H_weir, HW_plantleveling] := PLT/m
[grit_dim, n_GritRisers, n_GritOrf, D_GritRiser, D_GritOrf] := Grit
D_GritOrf := D_GritOrf[0]
# Defining components of Table Arrays:
headerrow := ["Parameter"; "Value"; "Units"]
Parameters := [
    "Number of lamella in sedimentation tanks", N_lamella, " ";
    "critical velocity in sed tank", v_c, " meter per day";
    "number of baffles in flocculator", tot_baffle, " ";
    "total headloss through flocculator", floctotal_hl*m/cm, "centimeters";
    "length of the sedimentation inlet launder", SedPipe_length, "meters";
    "diameter of orifices in the launder", D_laundOrf*m/in, "inches";
    "distance between orifices in the launder", laundOrf_dist, "meters";
    "manifold elevation", manifold_elevation, "meters";
    "diameter of the sedimentation inlet launder", D_launder*m/in, "inches";
    "number of orifices in the launder", n_laundOrf, " ";
    "diameter of sedimentation outlet sludge pipe", waste_ind*m/in, "inches";
    "diameter of orifices in sludge pipe", D_sludgeOrf*m/cm, "centimeters";
    "distance between orifices in sludge pipe", sludgeOrf_dist, "meters";
    "Diameter of weir in Plant Leveling Tank", D_weir*m/in, "inches";
    "Height of weir in PLT", H_weir*m/in, "inches";
    "Height of the Water in the PLT", HW_plantleveling, "meters";
    "number of risers in grit chamber", n_GritRisers, " ";
    "diameter of risers in grit chamber", D_GritRiser*m/in, "inches";
    "diameter of orifices in grit chamber", D_GritOrf*m/cm, "centimeters"
]
headercolumn
Units := Parameters[:, 2]
headercolumn := Parameters[:, 0]
Z := Parameters[:, 1]
table(headerrow, headercolumn, Z) :=
    for i ∈ 0 .. length(headercolumn)
        for j ∈ 0 .. last(headerrow)
            table[i, j] ← headerrow[j] if i == 0
            otherwise
                table[i, j] ← headercolumn[i - 1] if j == 0
                table[i, j] ← Z[i - 1] if j == 1
                table[i, j] ← Units[i - 1] if j == 2
    return table
headercolumn_Dim := [" Sedimentation Tank"; "Dimensions of Flocculator"; "Dimensions of Grit Chamber"; "Dimensions of Leveling Tank"; "Dimensions of Channel"]
headerrow_Dim := ["Component"; "Length"; "Width"; "Height"; "Units"]
Dim_y := [sedtank_dim[1]; floc_dim[1]; grit_dim[1]; lvltank_dim[1]; Channel_dim[1]/m]
Dim_z := [sedtank_dim[2]; floc_dim[1]; grit_dim[2]; lvltank_dim[2]; Channel_dim[2]/m]
Dim_x := [sedtank_dim[0]; floc_dim[0]; grit_dim[0]; lvltank_dim[0]; Channel_dim[0]/m]
Units2 := ["meter"; "meter"; "meter"; "meter"; "meter"]
tableDim(headerrow_Dim, headercolumn_Dim, Dim_x, Dim_y, Dim_z, Units2) :=
    for i ∈ 0 .. length(headercolumn_Dim)
        for j ∈ 0 .. last(headerrow_Dim)
            tableDim[i, j] ← headerrow_Dim[j] if i == 0
            otherwise
                tableDim[i, j] ← headercolumn_Dim[i - 1] if j == 0
                tableDim[i, j] ← Dim_x[i - 1] if j == 1
                tableDim[i, j] ← Dim_y[i - 1] if j == 2
                tableDim[i, j] ← Dim_z[i - 1] if j == 3
                tableDim[i, j] ← Units2[i - 1] if j == 4
    return tableDim
# Constructing Plant Elevation Tables:
headerrow_elevation := ["Element"; "Elevation from bottom of the sed tank (m)"; "Elevation from platform (m)"]
# top of alum stock tank
# port on alum stock tank
# bottom of alum stock tank
# alum platform height
# valve level in the FCM
# water level in the FCM
# end of the FCM tube at maximum alum dose
# grit chamber wall
# grit chamber maximum water level
# orifice elevation in the grit chamber
# horizontal pipe centerline where it leaves the grit chamber
# water level in rapid mix
# wall height for beginning of flocculator
# water level at beginning of flocculator
# wall height for the sedimentation tank
# water level in the sedimentation tank and channel
# top of the effluent launder
# top of the plate settlers
# bottom of the plate settlers
# platform height
# weir height
# level control water height
headercolumn_elevation := [
    "top of alum stock tank";
    "port on alum stock tank";
    "bottom of alum stock tank";
    "alum platform height";
    "valve level in the FCM";
    "water level in the FCM";
    "end of the FCM tube at maximum alum dose";
    "grit chamber wall";
    "grit chamber maximum water level";
    "orifice elevation in the grit chamber";
    "horizontal pipe centerline where it leaves the grit chamber";
    "water level in rapid mix";
    "wall height for beginning of flocculator";
    "water level at beginning of flocculator";
    "wall height for the sedimentation tank";
    "water level in the sedimentation tank and channel";
    "centerline of the effluent launder";
    "top of the plate settlers";
    "bottom of the plate settlers";
    "platform height";
    "weir height";
    "level control water height";
    "level control wall height"
]
tableElevation(headerrow_elevation, headercolumn_elevation, Z_elevation) :=
    for i ∈ 0 .. length(headercolumn_elevation)
        for j ∈ 0 .. last(headerrow_elevation)
            table[i, j] ← headerrow_elevation[j] if i == 0
            otherwise
                table[i, j] ← headercolumn_elevation[i - 1] if j == 0
                table[i, j] ← Z_elevation[i - 1] if j == 1
                table[i, j] ← Z_elevation[i - 1] - Z_elevation[22] if j == 2
    return table
# Tables:
# top
# [component: inputs table(headerrow, headercolumn, Z)]
# [component: inputs tableDim(headerrow_Dim, headercolumn_Dim, Dim_x, Dim_y, Dim_z, Units2)]
# [component: inputs tableElevation(headerrow_elevation, headercolumn_elevation, Z_elevation)]
# the negative sign here for alum platform height shows that the height chosen
# for the height of the chemical platform column is larger than
# that calculated based on the headloss through the FCM and
# Grit Chamber, so that from the platform the height of the platform
# is actually below the platform to make up for the shorter height needed
# AutoCAD references
# inputs for autocad
# Colors
grey := [132; 132; 132]
ltgrey := [214; 214; 214]
dkgrey := [91; 91; 91]
blue := [0; 255; 255]
blue2 := [0; 191; 255]
blue3 := [0; 127; 255]
green := [0; 255; 0]
purple := [127; 0; 255]
ltpurple := [125; 0; 160]
zc := .1 m
zc_point := [0; .1; 0]*m
acad_version := 2006
# Sedimentation Tank
tank_origin := [0; 0; 0]*m
tank_dim := sedtank_dim*m
channel_dim := [tank_dim[1] + 2*tank_thick; Channel_dim[1]; Channel_dim[2]]
waterlevel := tank_dim[2] - water_depth*m
manifold_depth := spaceabove/2*m
num_tanks := n_sedtanks
sedpipe_inr := (D_launder/2*m)
sedtankpipe9_length := Pipe9_length*m
offfloor_length := offfloor_length*m  # ** this should have a box
manifold_inr := (D_launder/2*m)
manifoldorifice_rad := D_laundOrf/2*m
manifoldorifice_dist := laundOrf_dist*m
waste_inr := (waste_ind*m/2)
wasteorifice_rad := D_sludgeOrf/2*m
wasteorifice_dist := sludgeOrf_dist*m
offfloorlamina_dist := spacebelow_total  # **this should have a box
lamina_amp := .5 in
lamina_thick := 4 mm
lamina_width := tank_dim[1]
lamina_length := L_lamella
lamina_periods := 8.5
lamina_slope := α = 60 deg
lamina_num := N_lamella
lamina_col := 1  # this is a constant!
lamina_x := lamella_spacing
lamina_y := 7 cm
z_rotation := 0
rotate_angle := 90
ϕ := beta = 30 deg  # sedtank slope angle
# Flocculation Tank
numfloc_tanks := 2
floc_dim := floc_dim*m
flochole_dim := [uturnhole_dim[0]*m; tank_thick; uturnhole_dim[1]*m]  # **this should have a box
baffletank1_location := baffle_positions[:, 0][0]*m
baffletank1_num := rows(baffletank1_location)
baffletank2_location := baffle_positions[:, 1][0]*m
baffletank2_num := rows(baffletank2_location)
baffle_amp := .5 in
baffle_thick := 4 mm
baffle_slope := 90 deg
baffle_width := floc_dim[1]
baffle_col := 1  # this is a constant!
baffle_periods := 8.5
baffle_y := 7 cm
baffle_num := 1
baffle_x := 4 in
# Platform
column_dim := [column_width; column_length; tank_dim[2] + tank_thick - channel_dim[2] - channel_thick]
# Plant Level Tank
lvlpipe_inr := manifold_inr
effluent_inr := (D_weir/2*m)
sedeff_origin := [
    tank_origin[0] - tank_dim[0] - tank_thick;
    tank_origin[1] + 2.5*tank_dim[1] + 2*tank_thick;
    tank_origin[2] + tank_dim[2] - channel_dim[2] - channel_thick - 2*ElbowRadius(2*sedpipe_inr)
]
lvltank_dim := lvltank_dim*m
lvltank_waterlvl := HW_plantleveling*m
wall_disp := 3/12*ft + outerradius(2*effluent_inr)
Δz_effluent := ElbowRadius(2*sedpipe_inr) + platform_thick - channel_dim[2]
# Grit Tank
grit_thick = 0.15 m
walk_space := 18 in
grit_origin := [
    tank_origin[0] - tank_dim[0] - tank_thick;
    tank_origin[1] + (num_tanks*tank_dim[1]) + (num_tanks*tank_thick) + 3*floc_dim[1]/4;
    tank_origin[2] + floc_inleth + platform_thick
]
grit_dim := grit_dim*m
grit_holes := 7
Δx_grit := walkway_width
grit_rad := .25 in
gritriser_h := 30/12*ft
Δy_grit := (numfloc_tanks*tank_dim[1] + (numfloc_tanks - 1)*tank_thick)/4 + tank_thick + walkway_width - grit_dim[1] - 2*grit_thick
gritpipe_inr := D_GritRiser*m/2
gritdisp1 := 8 in
Δz_grit := tank_dim[2] - channel_dim[2] - grit_thick
gritdisp2 := 6 in
# Chemical Stock Platform
stockplat_dim1 := [
    4*r_drum + 3*drum_disp + lvltank_dim[0] + 2*lvltank_thick - grit_dim[0] - 2*grit_thick;
    2*r_drum + 2*drum_disp;
    stockplat_thick
]
stockplat1_origin := [
    tank_origin[0] - tank_dim[0] - tank_thick - walkway_width - grit_dim[0] - 2*grit_thick - ShortTeeLength(NominalPipeSize(2*gritpipe_inr)) - walk_space;
    tank_origin[1] + num_tanks*tank_dim[1] + (num_tanks + 1)*tank_thick + floc_dim[1] + walkway_width;
    tank_origin[2] + tank_dim[2] - channel_dim[2] + stockplatcol_dim[2]
]
stockplat_dim2 := [4*r_drum + 3*drum_disp; 2*r_drum + 2*drum_disp; stockplat_thick]
stockplat2_origin := [
    tank_origin[0] - tank_dim[0] - tank_thick - walkway_width - lvltank_dim[0] - 2*lvltank_thick;
    tank_origin[1] + num_tanks*tank_dim[1] + (num_tanks + 1)*tank_thick + floc_dim[1] - grit_dim[1] - 2*grit_thick;
    tank_origin[2] + tank_dim[2] - channel_dim[2] + stockplatcol_dim[2]
]
# [reference: basics.xmcd]
# [reference: pipe.xmcd]
# [reference: elbow.xmcd]
# [reference: Channel.xmcd]
# [reference: tank.xmcd]
# [reference: Manifold.xmcd]
# [reference: Sludge.xmcd]
# [reference: inputs.xmcd]
# [reference: lamina.xmcd]
# [reference: SedTankslopes.xmcd]
# [reference: pipe.no_zoom.xmcd]
# [reference: SedTankwithlamina.xmcd]
# Top Level drawing scripts
Plantscript1 :=
    Sedtank ← Sedtank
    Floctank ← Floctank
    layerthaw1 ← layer_thaw("channel")
    layerthaw2 ← layer_thaw("floctank")
    union1 ← concat("_union", sp, "ALL", sp)
    layerfreeze1 ← layer_freeze("floctank")
    one ← stack(layerthaw1, layerthaw2, union1, layerfreeze1)
    return stack(Sedtank, Floctank, one)
Plantscript1
Plantscript2 :=
    Sedeff ← Sed_eff(sedeff_origin, tank_dim[1] + tank_thick, lvltank_dim, walkway_width, tank_dim[1]/2 + tank_thick + floc_dim[1] - grit_dim[1] - lvltank_dim[1] - 2*lvltank_thick, Δz_effluent, lvltank_thick, platform_thick, lvlpipe_inr, effluent_inr, lvltank_waterlvl, num_tanks, wall_disp)
    layerset1 ← layer_set("0")
    layerfreeze1 ← layer_freeze("lvlpipe")
    layerfreeze2 ← layer_freeze("lvlelbow")
    layerfreeze3 ← layer_freeze("lvltank")
    Platform ← Platform(grey, tank_origin, tank_dim, floc_dim, channel_dim, column_dim, lvltank_dim, tank_thick, channel_thick, lvltank_thick, platform_thick, walkway_width, num_tanks, r_drum, drum_disp)
    three ← stack(Sedeff, layerset1, layerfreeze1, layerfreeze2, layerfreeze3, Platform)
    return three
Plantscript3 :=
    layerset ← layer_set("0")
    layerfreeze1 ← layer_freeze("platform")
    Grit ← Grit_script
    stock1 ← Stock1(grey, stockplat1_origin, stockplat_dim1, stockplatcol_dim, r_drum, h_drum, walkway_width)
    stock2 ← Stock(grey, stockplat2_origin, stockplat_dim2, stockplatcol_dim, r_drum, h_drum, walkway_width)
    layer1 ← layer_thaw("barrel")
    layer2 ← layer_thaw("barrel1")
    layer3 ← layer_thaw("channel")
    layer4 ← layer_thaw("elbow")
    layer4a ← layer_thaw("elbowa")
    layer4b ← layer_thaw("elbowb")
    layer5 ← layer_thaw("floctank")
    layer6 ← layer_thaw("grit-cross")
    layer7 ← layer_thaw("grit-elbow")
    layer8 ← layer_thaw("grit-pipe")
    layer9 ← layer_thaw("grit-riser")
    layer10 ← layer_thaw("grit-tank")
    layer11 ← layer_thaw("grit-tee")
    layer12 ← layer_thaw("lvlelbow")
    layer13 ← layer_thaw("lvlpipe")
    layer14 ← layer_thaw("lvltank")
    layer15 ← layer_thaw("manifold")
    layer16 ← layer_thaw("pipe")
    layer17 ← layer_thaw("platform")
    layer18 ← layer_thaw("sludgepipe")
    layer19 ← layer_thaw("stplatform")
    layer20 ← layer_thaw("stplatform1")
    layer21 ← layer_thaw("tank")
    layer22 ← layer_thaw("baffle")
    layer23 ← layer_thaw("lamina")
    one ← stack(layerset, layerfreeze1, Grit, stock1, stock2)
    two ← stack(layer1, layer2, layer3, layer4, layer4a, layer4b, layer5, layer6, layer7, layer8, layer9, layer10, layer11, layer12, layer13, layer14, layer15, layer16, layer17, layer18, layer19, layer20, layer21, layer22, layer23, viewse)
    return stack(one, two)
