# Minor Loss Coefficients
# Individual K Values
K_El90 := 0.9
K_El45 := 0.45
K_GateValve := 0.39
K_ChkValveConv := 4
K_ChkValveBall := 4.5
K_GlobeValve := 10
K_AngleValve := 4.3
K_Exp0.75 := 0.18
K_Exp0.5 := 0.55
K_Exp0.25 := 0.25
K_Cont0.75 := 0.18
K_Cont0.5 := 0.33
K_Cont0.25 := 0.43
K_ReturnBend := 1.5
K_TeeFlowRun := 0.6
K_TeeFlowBr := 1.8
K_Orifice := 0.63
K_LTurn90 := 0.45  # K.lturn is the K value for a long radius ninety degree turn
K_PipeEnt := 0.5  # K.ent is the K value for a pipe entrance
K_PipeExit := 1
K_sum(N_Elbow45, N_Elbow90, N_TeeRun, N_TeeBr, GateValve, GlobeValve, AngleValve, CheckValveConv, CheckValveBall) :=
    K_2 ← N_Elbow45*K_El45 + N_Elbow90*K_El90
    K_3 ← K_TeeFlowRun*N_TeeRun + K_TeeFlowBr*N_TeeBr
    K_4 ← GateValve*K_GateValve + GlobeValve*K_GlobeValve + AngleValve*K_AngleValve + CheckValveConv*K_ChkValveConv + CheckValveBall*K_ChkValveBall
    K_sum ← K_2 + K_3 + K_4
    return K_sum
