# This program calculates the water levels throughout the plant
# This file does not yet calculate
# chlorine feed elevations
# Sedimentation Exit Headloss Calculations
HL_sedexits(Q_plant, D_laun, L_exits, K_exits, ν, ε) :=
    sum ← 0
    for i ∈ 0 .. last(L_exits)
        C_plocal[i] ← C_p(Q_plant/length(L_exits), D_laun, L_exits[i], K_exits[i], ν, ε)
        sum ← sum + 1/sqrt(C_plocal[i])
    8*Q_plant^2/(g*π^2*D_laun^4*sum^2)  # error: This variable is undefined.
# Fluids Function for Headloss
# WIP Calculation of Sed Tank Exit Pipes
# Calculate the length of sedimentation tank exit pipes ( a, b and c) L.sedexits
L_sedexits(channel_thick, tank_thick, width_channel, walkway_width, PLT_length, platform_thick, SedTank_width) :=
    A ← 3*tank_thick + 2*platform_thick + width_channel + walkway_width + PLT_length/3 + 0.5*SedTank_width
    B ← A + PLT_length/3 + 1.0*SedTank_width
    C ← B + PLT_length/3 + 1.0*SedTank_width
    return [A; B; C]
# Plant Elevation Function
PlantElevations(Q_plant, Grit, Laund, SedTank, Q_alum, H_weir, D_weir, HL_floc, L_lamella, HL_Launder, L_sedexits) :=
    HW_sed ← SedTank[:, 2][0]*m
    ZW_sed ← HW_sed
    HW_PLT ← HW_channel - HL_Launder
    n_launorf ← Laund[:, 5][0]
    H_stocktank ← h_drum
    Z_platform ← SedTank[:, 3][0]*m
    HL_GCorf ← h_lorificemax
    D_orf ← Grit[:, 4][0]*m
    D_launorf ← Laund[:, 1][0]*m
    L_laun ← Laund[:, 0][0]*m
    HL_GCorf ← h_lmax
    D_sedinlet ← Laund[:, 4][0]*m
    manifold_depth ← Laund[:, 3][0]*m
    Z_platebottoms ← ZW_sed - 2*manifold_depth*2 - L_lamella
    D_laun ← D_sedinlet
    D_rm ← Grit[:, 3][0]*m
    n_GCorf ← Grit[:, 1][0]*sum(Grit[:, 2][0])
    HL_weir ← Headloss_weir(Q_plant, D_weir)
    n_lamella ← SedTank[:, 1][0]
    HL_launorf ← h_orifice(D_launorf, K_orifice, Q_plant/(n_launorf*n_sedtanks))
    HL_launder ← h_lmanifold(Q_plant/n_sedtanks, D_laun, L_laun, 0, ν, ε_pvc, n_lamella)
    HT_sed ← HW_sed + freeboard_sed
    Z_platetops ← (Z_platebottoms + L_lamella*sin(α))
    Z_launderCL ← (ZW_sed - Z_platetops)/2 + Z_platetops
    K_exits ← n_sedexitturns*K_el90 + K_exit
    HL_sedtolevel ← HL_sedexits(Q_plant, D_laun, L_sedexits, K_exits, ν, ε_pvc) + HL_launorf + HL_launder
    ZT_sed ← ZW_sed + freeboard_sed
    ZW_level ← ZW_sed - HL_sedtolevel
    Z_weir ← ZW_level - HL_weir
    ZT_level ← ZT_sed
    HL_sedinlet ← h_l(Q_plant/(n_sedtanks*n_sedinlet), D_sedinlet, L_sedinlet, n_siturns*K_lturn + K_ent, ν, ε_pvc)
    ZW_floc_max ← ZW_sed + HL_floc
    ZT_floc_max ← ZW_floc_max + freeboard_sed
    ΣK_rm ← K_el90*n_rmturns + K_ent
    HL_rm ← h_l(Q_plant, D_rm, L_rmpipe, ΣK_rm, ν, ε_pvc)
    ZW_rm ← ZW_floc_max + HL_rm
    HL_freefall ← 3*D_rm/2 + D_orf/2
    Z_GCorf ← ZW_rm + HL_freefall
    H_GCorf ← Z_GCorf - Z_platform
    ZW_GC ← Z_GCorf + HL_GCorf
    HW_GC ← ZW_GC - Z_platform
    ZT_GC ← ZW_GC + freeboard_sed
    Z_rmhorizontalpipecenterline ← ZW_rm
    Z_FCMlowestport ← Z_GCorf
    Z_FCMhighestport ← Z_GCorf + HL_FCM
    Z_FCMvalve ← HL_FCMvalvefreefall + Z_FCMhighestport
    Z_botAldrum ← Z_FCMhighestport + HL_FCMvalvefreefall + HL_FCMinlet - H_stocktankport
    Z_topAldrum ← Z_botAldrum + H_stocktank
    Z_Aldrumport ← Z_botAldrum + H_stocktankport
    Z_chemplatform ← Z_botAldrum - stockplatcol_dim[2]
    Z ← [
        Z_topAldrum[0];
        Z_Aldrumport[0];
        Z_botAldrum[0];
        Z_chemplatform[0];
        Z_FCMvalve[0];
        Z_FCMhighestport[0];
        Z_FCMlowestport[0];
        ZT_GC[0];
        ZW_GC[0];
        Z_GCorf[0];
        Z_rmhorizontalpipecenterline;
        ZW_rm;
        ZT_floc_max;
        ZW_floc_max;
        ZT_sed;
        ZW_sed;
        Z_launderCL;
        Z_platetops;
        Z_platebottoms;
        Z_platform;
        Z_weir;
        ZW_level;
        ZT_level
    ]
    return Z  # error: This variable is undefined.
# Call all varaibles needed for calculations
# L.sedexits is a work in progress calculation, for now we just input values
# Calculate Headloss through Launder orficies
# Calculate Headloss through Launder
# Calculate Height of sedtank
Outputs
