# Plant Leveling Tank Design
# [reference: userinputs.xmcd]
# [reference: DesignAssumptions.xmcd]
# [reference: PipeDatabase.xmcd]
# [reference: MinorLossCoefficients.xmcd]
# [reference: FluidsFunctions.xmcd]
# [reference: Channel.xmcd]
# Water level in the leveling plant is assumed to be equal to the water level in the channel minus the head loss through the launder
HW_Plt := HW_Channel - HL_SedLaunderBod
# An estimated weir height is determined by substracting the assumed water height on top of the weir from the water level in the leveling tank
D_PltWeir := (3*Q_Plant/(2*Cd_PltWeir*sqrt(2*g)*π*Pi_PltWeir^(3/2)))^(2/5)
# The weir equation is used to determine the nominal size for the diameter of the weir
# Using the pipe database file, and given the schedule of the pipe, the actual nominal diameter of the pipe is determined
ND_PltWeir := NominalDiameter(D_PltWeir, EN_PipeSpec) = 8 in
ΔH_PltWeir := (3*Q_Plant/(2*Cd_PltWeir*sqrt(2*g)*π*D_PltWeir))^(2/3) = 5.25593 cm  # Using the inner diameter, the actual spacing above the weir is calculated
# The actual weir height is determined using the actual inner diameter of the pipe and the weir equation
H_PltWeir := (HW_Plt - (3*Q_Plant/(2*Cd_PltWeir*sqrt(2*g)*π*D_PltWeir))^(2/3)) = 44.7441 cm
L_Plt := (N_SedTank*(ND_SedLaunder + S_Plt) + 2*S_Plt + ND_PltWeir)  # error: This variable is undefined.  # plt_length
# Inner length is equal to the sum of the diameters of the launders and the weir
W_Plt := 2*S_Plt + ND_PltWeir
plt_height
# Height of the wall for the leveling tank =height of the wall for the channel
H_Plt := (HW_Channel + H_PlantFreeboard)
