# Sedimentation Tank Inlet Slopes Design:
L_Sed =  # error: This variable is undefined.  # Length of sed tank
W_Sed =  # error  # Width Sed Tank
Q_Sed =  # error  # Sed Tank Flow Rate
PI_JetDissipation := 5
# Calculate the size of the area of the exit into the sed. tank.
Q_SedInlet := Q_Sed/(N_SedInletSlopes*N_SlopePairs)  # Flow Rate through one slope
K_SedInletPort := 2.5  # This value should be checked at some point  # New Var.
# Vena Contracta Coefficient associated with water traveling out of the sed tank inlet and into the sed tank.
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V_SedInletPort := G_FlocMin^(1/2)*(2*Nu_Water*Pi_FlocDissipation*Q_SedInlet/(K_SedInletPort*L_Sed))^(1/4)  # New Var.
# Maximum Velocity that the water can flow out of the port into the Sed tank.
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B_SedInlet := Q_SedInlet/(V_SedInletPort*L_Sed)
H_SedInlet := B_SedInlet/sin(AN_SedTopInlet - AN_SedBottom)
# New Var. | Necessary Width of the port out of the Sed Tank Inlet
A_Inlet := H_SedInlet*L_Sed
A_SedInlet := 2*A_Inlet  # The four is a factor of safety to make sure the flow through the channel is even.
Z_SedSludge := outerdiameter(ND_SedSludge)  # The vertical height from zero taken up by the sludge pipe
H_SedBottomSlope := W_Sed/(2*N_SlopePairs)*tan(AN_SedBottom)  # The height of the bottom slope
H_SedTopSlope := W_Sed/(2*N_SlopePairs)*tan(AN_SedTopInlet)  # The height taken up by the top slope
H_SlopeThickness := T_SedInletSlope/cos(AN_SedTopInlet)  # The vertical height occupied by the top slope
# The vertical height from zero taken up by the entire slope set up
Z_SedSlopes := Z_SedSludge + H_SedTopSlope + H_SlopeThickness
# Some portion of this area will be filled with concrete
# inorder to create a smaller area that has a higher velocity
# New Var.
# Length of the Top of the Inlet Slope including what will be cut out for the exit into the sed tank.
L_SedTopInlet := (W_Sed/(2*N_SlopePairs)/cos(AN_SedTopInlet))
# Length of the Bottom Inlet
# Slope (from the wall to tank center
# ignoring the sludge pipe)
# New Var.
L_SedBottom := W_Sed/(2*N_SlopePairs)/cos(AN_SedBottom)
# Cross Sectional Area of the Sed Tank
# Inlet
A_SedInletTotal := W_Sed/(4*N_SlopePairs)*(H_SedTopSlope - H_SedBottomSlope)  # New Var.
# Recalculating the area of the slope distrbution to for water to have the correct velocity.
W_SlopesOpen := sqrt(2*A_SedInlet*W_Sed/(2*N_SlopePairs)/(H_SedTopSlope - H_SedBottomSlope))
H_SedTopInletOpen := W_SlopesOpen*tan(AN_SedTopInlet)
H_SedBottomOpen := W_SlopesOpen*tan(AN_SedBottom)
L_SedTopInletOpen := W_SlopesOpen/cos(AN_SedTopInlet)
L_SedBottomOpen := W_SlopesOpen/cos(AN_SedBottom)
L_SedTopFilled := L_SedTopInlet - L_SedTopInletOpen
W_SlopesFilled := W_Sed/(2*N_SlopePairs) - W_SlopesOpen
L_SedBottomFilled := L_SedBottom - L_SedBottomOpen
# Wetted Perimeter of the Sed Tank Inlet
# (cross-section)
# New Var.
WP_SedInlet := (H_SedTopInletOpen - H_SedBottomOpen) + L_SedTopInletOpen + L_SedBottomOpen
R_hGen(A_SedInlet, WP_SedInlet) =  # error  # Hydraulic Radius of the Sed Tank Inlet
A_SedInletActual := A_SedInletTotal - (1/2)*B_SedInlet*(B_SedInlet/cos(AN_SedTopInlet - AN_SedBottom))
n := 1000
# The number of sections that the inlet will be split into for numerical analysis
L_SedInletSec := L_Sed/n
ε := 0.12 mm
HL_SedInlet := h_fGen(A_SedInletActual, WP_SedInlet, V_SedInletPort, L_SedInletSec, Nu_Water, ε)
# New Var. | Major Headloss through the Sed tank Inlet.
HL_SedInletPort := h_eGen(V_SedInletPort, K_SedInletPort)  # New Var.  # Minor Headlosses of water flowing through a port
# New Var.
# Ratio if Headloss through the inlet to Headloss out of the port
PI_HLSedInletPort := HL_SedInlet/HL_SedInletPort
Q_SedInletPort := V_SedInletPort*B_SedInlet*L_SedInletSec  # New Var.  # Flow Rate Through one section of port
Q_SedInletInitial := Q_Sed/(N_SedInletSlopes*N_SlopePairs)  # New Var.  # Initial Flow Rate Through the Manifold
W_SedInletSlope := H_SedTopInlet/sin(AN_SedTopInlet) - H_SedInlet  # New Var.  # Dimensions of the Panel to be used to the top of the sedimentation tank inlets
L_SedInletSlope := L_Sed  # New Var.
# The following code is for tapering the cross sectional area of the inlet.
SedInletAreas :=
    Q_Initial ← Q_SedInletInitial
    A_Next[0] ← A_SedInletActual
    for i ∈ 1 .. n
        Q_Next ← Q_Initial - Q_SedInletPort
        A_Next[i] ← Q_Next/V_SedInlet
        Q_Initial ← Q_Next
    A_Array ← A_Next
    return A_Array
AreaEnd := SedInletAreas[978]
1000 - 978 = 22
22*L_SedInletSec =  # error
SedInletAreas[0] - SedInletAreas[1] =  # error
A_Port := L_SedInletSec*B_SedInlet
# Theoretically the cross sectional area of the channel should be zero at the end of the tank. But this is not plausible because the exit port must have a set width b across the entire channel. Thus there is a minimum area that the inlet must have. But this area is small enough that constant velocity through the inlet should be relatively possible.
SedInletLengths :=
    L_Next[0] ← 0 m
    for i ∈ 1 .. n
        L_Next[i] ← L_Next[i - 1] + L_SedInletSec
    L_Array ← L_Next
    return L_Array
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A_SedInletMin := W_Sed/4*(B_SedInlet*sin(AN_SedTopInlet) - B_SedInlet*sin(AN_SedBottom))  # New Var.  # The minumum possible Area for the Inlet
DeltaA_SedInlet := (A_SedInlet - A_SedInletMin)/n  # New Var.  # Change in Area for one section of Inlet
SedInletVelocities :=
    A_Initial ← A_SedInlet
    Q_Initial ← Q_SedInletInitial
    V_Next[0] ← Q_Initial/A_Initial
    for i ∈ 1 .. n
        A_Next ← A_Initial - DeltaA_SedInlet
        Q_Next ← Q_Initial - Q_SedInletPort
        V_Next[i] ← Q_Next/A_Next
        A_Initial ← A_Next
        Q_Initial ← Q_Next
    V_Array ← V_Next
    return V_Array  # New Var.
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Error_VMax := (SedInletVelocities[0] - SedInletVelocities)/SedInletVelocities[0]  # New Var.  # Error in Velocities through the inlet
L_SedInletHyp2 := H_SedBottom/sin(AN_SedBottom) - B_SedInlet
AN_SedInletBackTop := atan((H_SedTopInlet - H_SedBottom)/L_Sed)
L_SedInletBack := L_Sed/cos(AN_SedInletBackTop)
