# This program produces the critical parameters for a single sed tank. All sed tanks are built identically.
# Each tank should have the same flowrate. The total space below the tank is 1 m (design assumption). Part of this space will have sloped walls (to help with draining) and part might have
# straight walls. The length of the sloped walls is determined by the tank width and the
# slope of the walls (they should be between 45 and 60 deg). The space between the top
# of the plate settlers and the water surface is equal to .25*spacing between adjacent launders.
# Since each tank has 1 launderer, the space between adjacent ones is equal to the tank width.
# This should ensure equal flow of effluent through these pipes. The depth of the middle section of
# the tank is determined by the length and slope of the plate settlers. The total depth of the tank is
# equal to the sum of these three depths, plus a freeboard depth. Freeboard space is empty space between the top of the tank and the water surface
Q_Sed := Q_Plant/N_SedTanks
# Area available for water to flow parallel to the tank floor out of the slopes, per slope. The area available for the water to flow perpendicular to the tank floor should be at least as large as the area for parallel flow to ensure floc is not broken up.
A_SedSlopeOutlet := H_SedPort^2*N_SedPorts
W_SedSlopeGap := A_SedSlopeOutlet/L_Sed  # Minimum gap space required between slopes
# Assume that the space of the sludge drain not covered is half of the outer diameter.
W_SedGapDrain := outerdiameter(ND_SedSludge)/2
W_Trapezoid := W_SedSingle/2 - W_SedGapDrain/2
A_Trapezoid := 1/2*W_Trapezoid^2*(tan(AN_SedTopInlet) - tan(AN_SedBottom)) + H_SlopeRectangle*W_Trapezoid
H_SedPort := (K_SlopeExit*(V_SedUpBod*W_Trapezoid*Π_SedPort)^3/(2*Π_SedCell*ED_Slope))^(1/4)  # I assume square ports here
V_SedPort := V_SedUpBod*W_Trapezoid*Π_SedPort*H_SedPort/H_SedPort^2
V_Trapezoid := V_SedPort/4
L_Sed := V_Trapezoid*A_Trapezoid/(V_SedUpBod*W_Trapezoid)
L_SedTotal := Q_Plant/(V_SedUpBod*W_Trapezoid)
N_Slopes := L_SedTotal/L_Sed
N_TrianglesperTank := ceil(N_Slopes/N_SedTanks)
N_SlopePairs := N_TrianglesperTank/2
Q_SedInlet := V_Trapezoid*A_Trapezoid
W_SedPort := H_SedPort
Δ_SedPort := Π_SedPort*W_SedPort
N_SedPorts := ceil(L_Sed/(Δ_SedPort + W_SedPort))
W_Sed := W_SedSingle*N_SlopePairs
ND_SedPipeEntrance :=
    ND_SedPipeEntrance ← ND_SedInlet(K_El90, Q_Plant/(N_SedInletPipes*N_SedTanks), Nu_Water, G_FlocBod[last(G_FlocBod)], EN_PipeSpec) if sedlayout == 1
    ND_SedPipeEntrance ← ND_SedInlet(K_PipeExit, Q_Plant/(N_SedTanks*N_SedInletPipes), Nu_Water, G_FlocMin, EN_PipeSpec) if sedlayout == 3 or 2
    return ND_SedPipeEntrance
