# This program produces the critical parameters for a single sed tank. All sed tanks are built identically.
# [reference: DesignAssumptions.xmcd]
pipediameter := 6 in
SedTankDesign(Q_plant, SedTank_width, lamella_spacing, L_lamella, β, ChannelDim) :=
    Q_tank ← Q_plant/n_sedtanks
    spacebelow_slanted ← (SedTank_width/2)*tan(β)
    spacebelow_straight ← spacebelow_total - spacebelow_slanted
    angle_toosteep ← "Failure: Slope of walls too steep (should be less than 60 deg)."
    return angle_toosteep if spacebelow_slanted > 1 m
    spaceabove ← ratio_waterdepthtolaunderspacing*SedTank_width
    H_lamella ← L_lamella*sin(α)
    H_tank ← H_lamella + spaceabove + spacebelow_total + freeboard_sed
    v_c ← v_up/(1 + L_lamella/lamella_spacing*cos(α)*sin(α))
    vc_toobig ← "Failure: Critical velocity is greater than the suggested value"
    return vc_toobig if v_c > criticalvelocity_toobig
    A_active ← Q_tank/v_up
    L_active ← A_active/SedTank_width
    L_tank ← (L_lamella*cos(α) + L_active)
    N_lamella ← floor((L_active - ChannelDim[1])/(lamella_spacing/sin(α)))
    sedtank_dim ← [L_tank; SedTank_width; H_tank]
    water_depth ← H_tank - freeboard_sed
    z_plat ← water_depth - HW_channel
    freespace_belowinfluent ← spacingratio*pipediameter
    pipedown_length ← spacebelow_total - freespace_belowinfluent
    return [sedtank_dim/m, N_lamella, water_depth/m, z_plat/m, v_c*s/m, spaceabove/m, spacebelow_straight/m]
# Each tank should have the same flowrate. The total space below the tank is 1 m (design assumption). Part of this space will have sloped walls (to help with draining) and part might have
# straight walls. The length of the sloped walls is determined by the tank width and the
# slope of the walls (they should be between 45 and 60 deg). The space between the top
# of the plate settlers and the water surface is equal to .25*spacing between adjacent launders.
# Since each tank has 1 launderer, the space between adjacent ones is equal to the tank width.
# This should ensure equal flow of effluent through these pipes. The depth of the middle section of
# the tank is determined by the length and slope of the plate settlers. The total depth of the tank is
# equal to the sum of these three depths, plus a freeboard depth. Freeboard space is empty space between the top of the tank and the water surface
# The critical velocity is calculated and verfied against a max value. If the critical
# velocity is too large, some of the particles will not settle out in the sed tank.
# The active area is the area of the tank used for sedimentation, and this is used to determine the
# active length of the tank. The total length will be greater since a portion of the tank's length is unuasble because of the slope of the lamella.
# The channel runs along the width of the settling tanks and limits reduces L active even further. This new length is used to determine the number of plate settlers in a tank.
# z.plat is the height of the platform that the chemical drums sit on.
SedTankDesign(Q_plant, SedTank_width, lamella_spacing, L_lamella, β, ChannelDim)
SedTankDesign(500*gpm, 42 in, 5 cm, .8 m, 45 deg, [3.6; 0.898; 0.7]*m) = [[8.91611; 1.0668; 2.05952], 131, 1.95952, 1.35952, 0.000145986, 0.2667, 0.4666]
