# Sedimentation  Tank Design:
# [reference: UserInputs- 1m deep.xmcd]
# [reference: DesignAssumptions-1m deep.xmcd]
# [reference: MathFunctions.xmcd]
# [reference: PipeDatabase.xmcd]
# [reference: MinorLossCoefficients.xmcd]
# [reference: FluidsFunctions.xmcd]
# [reference: Inlet Channel.xmcd]
W_InletChannel = 0.36385 m
# This program produces the critical parameters for a single sed tank. All sed tanks are built identically.
# Each tank should have the same flowrate. The total space below the tank is 1 m (design assumption). Part of this space will have sloped walls (to help with draining) and part might have
# straight walls. The length of the sloped walls is determined by the tank width and the
# slope of the walls (they should be between 45 and 60 deg). The space between the top
# of the plate settlers and the water surface is equal to .25*spacing between adjacent launders.
# Since each tank has 1 launderer, the space between adjacent ones is equal to the tank width.
# This should ensure equal flow of effluent through these pipes. The depth of the middle section of
# the tank is determined by the length and slope of the plate settlers. The total depth of the tank is
# equal to the sum of these three depths, plus a freeboard depth. Freeboard space is empty space between the top of the tank and the water surface
Q_Sed := Q_Plant/N_SedTanks = 190 L/min
H_SedBelowSlope := Pi_BottomHWSed*HW_Sed = 0.6 m  # This depth of the sloped bottom
# the entire area under the lamella will be a part of the sloped bottom
H_SedBelow := H_SedBelowSlope = 0.6 m
# The distance between the lamella and the top of the slope they are set to meet.
H_SedBelowStraight := (H_SedBelow - H_SedBelowSlope) = 0 m
H_SedAbove = 0.12 m
H_SedPlate := HW_Sed - H_SedBelowSlope - H_SedAbove = 0.48 m
HW_Sed = 1.2 m  # Height of the water in the Sed tank.
H_Sed := (HW_Sed + H_PlantFreeboard) = 1.3 m
Z_Mp := (HW_Sed - HW_InletChannel)
# The specifics of the lamella:
L_SedPlate := H_SedPlate/sin(AN_SedPlate) = 0.554256 m  # This is the length of the lamella
# We need to make sure that both design constraints are met.
# VSedUp is based on the entire area in the bottom of the sed tank
# VSedC is based on the plate settlers.
# Calculate the inactive Length of the tank
# The critical velocity is calculated and verfied against a max value. If the critical
# velocity is too large, some of the particles will not settle out in the sed tank.
# Note: the 0 in this function manifold function is assuming that there are no minor losses in the system
# and thus the minor loss coefficient is 0.
L_SedVUp := Q_Sed/(V_SedUpBod*W_Sed) = 3.66383 m
L_SedInactiveEst := (L_SedPlate*cos(AN_SedPlate) + 2*W_InletChannel + 2*T_ChannelWall) = 1.30483 m
# Calculate minimum number of plate settlers
V_SedUpActiveMax := Q_Sed/(W_Sed*(L_SedVUp - L_SedInactiveEst)) = 108.719 m/day
B_SedPlate := L_SedPlate*cos(AN_SedPlate)*sin(AN_SedPlate)/(V_SedUpActiveMax/V_SedCBod - 1) = 2.43114 cm  # The space between the lamella
L_SedActiveMin := Q_Sed/(V_SedUpActiveMax*W_Sed) = 2.359 m  # Note this doesn't include the area occupies by the thickness of the plate settlers
# This is the minimum length of the sed tank to get the active upward velocity
# Number of spaces where water is traveling is one less than the number of plates used to create those spaces
N_SedPlatesMin := ceil(L_SedActiveMin*sin(AN_SedPlate)/B_SedPlate) + 1 = 86
V_SedUpActiveMax := Q_Sed/(W_Sed*(L_SedVUp - L_SedInactiveEst - N_SedPlatesMin*T_SedPlate/sin(AN_SedPlate))) = 124.433 m/day
B_SedPlate := L_SedPlate*cos(AN_SedPlate)*sin(AN_SedPlate)/(V_SedUpActiveMax/V_SedCBod - 1) + T_SedPlate = 2.39729 cm
L_SedActiveMin := Q_Sed/(V_SedUpActiveMax*W_Sed) = 2.06109 m
N_SedPlatesMin := ceil(L_SedActiveMin*sin(AN_SedPlate)/(B_SedPlate - T_SedPlate)) + 1 = 87
(L_SedInactiveEst + ((N_SedPlatesMin*T_SedPlate + (N_SedPlatesMin - 1)*(B_SedPlate - T_SedPlate))/sin(AN_SedPlate))) = 3.6889 m
L_Sed := max(L_SedVUp, L_SedInactiveEst + ((N_SedPlatesMin*T_SedPlate + (N_SedPlatesMin - 1)*(B_SedPlate - T_SedPlate))/sin(AN_SedPlate))) = 3.6889 m
# Now calculate actual values of all parameters!
# This is the active legnth of the sedimentation tank.not including the thickness of the plates.
# The B value here is from center to center for the baffles.
N_SedPlates := floor((L_Sed - L_SedInactiveEst - T_SedPlate/sin(AN_SedPlate))*sin(AN_SedPlate)/B_SedPlate + 1) = 87
# There is one extra baffle than space between baffles.  because of the extra baffles has to be
# subtracted from the estimated active length of the sed tank.
L_SedActive := L_Sed - L_SedInactiveEst - N_SedPlates*T_SedPlate/sin(AN_SedPlate) = 2.0827 m
V_SedUp := Q_Sed/(L_Sed*W_Sed) = 69.5242 m/day
V_SedUpActive := Q_Sed/(L_SedActive*W_Sed) = 123.142 m/day
V_SedC := V_SedUpActive/(1 + L_SedPlate/(B_SedPlate - T_SedPlate)*cos(AN_SedPlate)*sin(AN_SedPlate)) = 9.89623 m/day
