# Sludge Drain Program
# References
# Fluids Functions
# [reference: FluidsFunctions.xmcd]
# Pipe Database
# [reference: PipeDatabase.xmcd]
# Design Assumptions
# [reference: DesignAssumptions.xmcd]
# Sedimentation Function
# [reference: Sedimentation Function.xmcd]
Sludge(Q_plant, PipeSpecification, L_sedtank, SedTank_width, HW_sedtank) :=
    Q_tank ← Q_plant/n_sedtanks
    n_sludgeports ← floor(L_sedtank/L_sludgeports)
    Q_draininitial ← 2*L_sedtank*SedTank_width*HW_sedtank/t_drain
    D_avail ← AvailPipeSizes1(PipeSpecification)
    D_sludgedrain ← D_manifold(Q_tank, HW_sedtank, 2*L_sedtank, Q_ratioSludge, D_avail, ν, ε_pvc, 0, n_sludgeports)
    D_sludgedrain ← NominalPipeSize(D_sludgedrain)
    h_sludgedrain ← h_lmanifold(Q_draininitial, D_sludgedrain, L_sedtank, 0, ν, ε_pvc, n_sludgeports)
    D_orifice ← D_orifices(h_sludgedrain, Q_tank, D_sludgedrain, n_sludgeports, HW_sedtank, K_orifice)
    return [D_sludgedrain/in, D_orifice/cm, L_sludgeports/m, L_sedtank/m, n_sludgeports]
# Given the orifice spacing, the number of orifices is determined by dividing the length of the sed tank by the orifice spacing
# The flow rate for draining is calculated given the assumed time for drainage, and the sed tank's dimensions
# For determining the manifold diameter, an iterative equation is used, which is dependent on the available pipe sizes given in the pipe database. The pipe schedule must be specified.
# The headloss through the manifold is used to calculate the size of the orifices
Sludge(250*gal/min, 8, 4.658 m, 1.067 m, 1.96 m) = [4, 0.614617, 0.1, 4.658, 46]
D_metdrill := [
    3 mm;
    4 mm;
    5 mm;
    6 mm;
    7 mm;
    8 mm;
    9 mm;
    10 mm;
    11 mm;
    12 mm;
    13 mm;
    14 mm;
    15 mm;
    16 mm;
    17 mm;
    18 mm;
    19 mm;
    20 mm
]
