# [reference: userinputs.xmcd]
# [reference: DesignAssumptions.xmcd]
# [reference: PipeDatabase.xmcd]
# [reference: MinorLossCoefficients.xmcd]
# [reference: FluidsFunctions.xmcd]
# [reference: Channel.xmcd]
# [reference: Sedimentation.xmcd]
# Sludge Drain Program
N_SludgeOrifices := floor(L_SedTank/B_SludgeOrifices)
Q_SludgeDrainInitial := 2*L_SedTank*W_SedTank*HW_Sed/Ti_SludgeDrain
HL_SludgeManifold := 50 cm
ND_SludgeDrain := ND_Manifold(Q_SedTank, HL_SludgeManifold, L_SedTank, Pi_QSludgeOrifices, EN_PipeSpec, NU, E_Pvc, 0, N_SludgeOrifices)
H_SludgeDrain := HL_Manifold(Q_SludgeDrainInitial, ND_SludgeDrain, L_SedTank, 0, NU, E_Pvc, N_SludgeOrifices)
D_SludgeOrifice := RoundNearest(D_orifices(H_SludgeDrain, Q_SedTank, ND_SludgeDrain, N_SludgeOrifices, HW_Sed, K_Orifice), D_Drill)  # error: This variable is undefined.
# Lsedtank here is equal to the length of the sludgepipe.
# Given the orifice spacing, the number of orifices is determined by dividing the length of the sed tank by the orifice spacing
# The flow rate for draining is calculated given the assumed time for drainage, and the sed tank's dimensions
# It isn't clear what the design constraint is for sizing this pipe.
D_metdrill := [
    3 mm;
    4 mm;
    5 mm;
    6 mm;
    7 mm;
    8 mm;
    9 mm;
    10 mm;
    11 mm;
    12 mm;
    13 mm;
    14 mm;
    15 mm;
    16 mm;
    17 mm;
    18 mm;
    19 mm;
    20 mm
]
