# [reference: FluidsFunctions.xmcd]
nu := 10^-6*m^2/s
A_circle(D_circle) := π*D_circle^2/4
PI_JetDissipation := 5
# Length of sed tank:
L_man := 3 m
# Width of sed tank:
w := 1 m
# Plant Flow Rate:
Q := 380*L/min
# Angle of ferrocement:
An_ferro := 45 deg  # Angle of the top panel of the entrance channel
# Flow rate through each manifold:
Q_man := Q/4 = 1583.33 cm^3/s
# Angle of bottom:
An_bottom := 10 deg
# Height of ferrocement:
H_ferro := .5*w*tan(An_ferro) = 0.5 m
# Number of port holes:
n := 50
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# Length of ferrocement:
L_ferro := .5*w/cos(An_ferro) = 0.707107 m
# Size of each port hole:
# Height of bottom:
H_bottom := .5*w*tan(An_bottom) = 0.0881635 m
# Effective size of port holes:
PI_Cell := 2
# Length of bottom:
L_bottom := .5*w/cos(An_bottom) = 0.507713 m
K := 2.5
# Target G
G_avg := 10*1/sec
# Area of manifold
A_man := w/4*(H_ferro - H_bottom) = 0.102959 m^2
Q_port := Q_man/n
Q_port = 31.6667 cm^3/s  # Flow through port given n and Deff
# Wetted perimeter
P_wetted := (H_ferro - H_bottom) + L_ferro + L_bottom = 1.62666 m
# Hydraulic Diameter:
D_ManHydraulic := 4*A_man/P_wetted = 0.25318 m
V_port := Q_port/A_circle(D_eff)  # error: This variable is undefined.
V_port =  # error: This variable is undefined.  # Velocity through port given n and Deff
# Hydraulic Radius:
R_hTri := A_man/P_wetted = 0.0632949 m
# Initial velocity in manifold:
V_man := Q_man/A_man = 1.53783 cm/s
V_man^2/(2*g) = 0.00120577 cm
V_G := G_avg^(1/2)*(2*nu*PI_Cell*Q_man/(K*L_man))^(1/4) = 1.70468 cm/s  # Velocity needed to get target G
W_rectPort := Q_man/(V_G*L_man) = 3.09605 cm
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H_man := h_orifice(D_eff, 0.62, Q_port)  # error: This variable is undefined.
H_man =  # error
D_Gf(Q, G_avg, n, PI_JD, nu) := (64/2*1/(G_avg^2*nu*PI_JD)*(Q/(π*n))^3)^(1/7)
D_Gf(Q, G_avg, n, PI_JetDissipation, nu) = 2.50272 in  # Port diameter needed to get target G given n & Q
A_man/(n*A_circle(D_eff)) =  # error
n_test := 10
D_G := D_Gf(Q_man, G_avg, n_test, PI_JetDissipation, nu) = 2.75388 in
ε := 0.12 mm
A_circle(D_G) = 0.00384279 m^2
3 m/50 = 0.06 m
Q_MultiplePort(Q_man, A_man, D_ManHydraulic, L_man, D_G, n) :=
    Q_port[0] ← Q_man/n
    loops ← 0
    error ← 1
    H_man[0] ← h_orifice(D_G, .62, Q_port[0])
    V[0] ← Q_man/A_man
    while |error| > 0.01 and loops < 200
        for i ∈ 1 .. n
            V[i] ← V[i - 1] - Q_port[i - 1]/A_man
            H_expansion ← V[i]*Q_port[i - 1]/(g*A_man)
            H_friction[i] ← h_f(V[i]*A_man, D_ManHydraulic, L_man/n, nu, ε)
            H_man[i] ← H_man[i - 1] - H_friction[i]
            Q_port[i] ← Q_orifice(D_G, H_man[i], 0.62)
        error ← (sum(Q_port) - Q_man)/Q_man
        H_man[0] ← (error + 1)^-2*H_man[0] if error > 0
        H_man[0] ← 2*H_man[0] otherwise
        loops ← loops + 1
    return V  # If we assume that the manifold is divided into 10 sections
N_sec := 10
L_ManSec := L_man/N_sec = 0.3 m
A_port := L_ManSec*W_rectPort = 0.00928816 m^2
Re_Tri := 4*V_man*R_hTri/nu = 3893.47
f_Tri :=
    f ← 0.25/log(ε/(3.7*4*R_hTri) + 5.74/Re_Tri^0.9)^2 if Re_Tri > Re_pipetransition
    f ← 64/Re_Tri otherwise
    return f
    = 0.0414397
H_lTri := f_Tri*L_ManSec/(4*R_hTri)*V_man^2/(2*g) = 5.92071e-5 cm
A_man = 1029.59 cm^2
A_man/(W_rectPort*L_man) = 1.1085
Pi_VenaContractaOrifice := 0.61
Q_rectPort := Q_man/n_test = 0.000158333 m^3/s
h_orificeTri := K*V_G^2/(2*g) = 0.00370403 cm
PI_Headloss := N_sec*H_lTri/h_orificeTri = 0.159845
Q_MultiplePort(Q_man, A_man, D_ManHydraulic, L_man, D_G, n) =  # error: These values can not be compared.
Q_man/n = 1.9 L/min
i := 1 .. n
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flowratio := max(Q_MultiplePort(Q_man, A_man, D_ManHydraulic, L_man, D_G, n))/min(Q_MultiplePort(Q_man, A_man, D_ManHydraulic, L_man, D_G, n))  # error: These values can not be compared.
A_man = 0.102959 m^2
Q_man = 95 L/min
L_man = 3 m
D_ManHydraulic = 0.25318 m
D_G = 0.0699485 m
h_f(Q_man/A_man*A_man, D_ManHydraulic, L_man, nu, .12 mm) = 2.01676e-5 m
h_orifice(D_G, .62, Q_man/n) = 9.00696e-6 m
