# Engineer Entered Values:
Q_Plant := 400*L/min
# sed tank parameters
W_Sed := 1 m  # width of lamella = width of sed tank
38 cm/sin(60 deg) = 43.8786 cm
L_SedPlateEstimated := 43.88 cm  # length of the lamella
B_SedPlate := L_SedPlateEstimated/20 = 2.194 cm  # lamella spacing
EN_PipeSpec := 4
EN_DrillSeries := 0
# floc parameteres
T_FlocBaffle := 2 cm
# Values used to Draw Plant:
T_PlantWall := 15 cm
T_PltWall := 15 cm
T_Ap := T_PltWall
T_Cp := T_Ap
T_EtWall := T_PltWall
T_Mp := 30 cm
T_ChannelWall := 15 cm
W_MpWalkway := 1 m
C_FcmDoseMax := 90*mg/L
C_FcmAlum := 120*gm/L
EN_FcmTube := 0
Ti_StockMin := 30 hr
