# Engineer Entered Values:
Q_Plant := 645*L/min
# sed tank parameters
AN_SedBottom := 55 deg
W_SedTank := 1 m  # width of lamella = width of sed tank
L_SedPlate := 90 cm  # length of the lamella
B_SedPlate := 5 cm  # lamella spacing
EN_PipeSpec := 4
EN_DrillSeries := 0
# floc parameteres
T_FlocBaffle := 2 cm
# Values used to Draw Plant:
T_Tank := 15 cm
T_PltWall := 15 cm
T_Ap := T_PltWall
T_Cp := T_Ap
T_Et := T_PltWall
T_Mp := 30 cm
T_Channel := 15 cm
W_Walkway := 1 m
C_FcmDoseMax := 90*mg/L
C_FcmAlum := 120*gm/L
EN_FcmTube := 0
Ti_StockMin := 30 hr
