PlantLevelingTank(Q_plant, PipeSpecification, D_launder, HL_launder) :=
    HW_plantleveling ← HW_channel - HL_launder
    H_weir1 ← HW_plantleveling - ΔH_leveling
    Diam_weir ← 3*Q_plant/(2*Cd*sqrt(2*g)*π*ΔH_leveling^(3/2))
    D_weir ← innerD(Diam_weir, PipeSpecification)
    D_weir ← NominalPipeSize(D_weir)
    H_weir ← HW_plantleveling - (3*Q_plant/(2*Cd*sqrt(2*g)*π*D_weir))^(2/3)
    plt_length ← 3*D_launder + D_weir + concrete_space
    plt_width ← |2*r_drum - D_weir| + D_launder + D_weir
    plt_height ← HW_channel + freeboard_sed
    lvltank_dim ← [plt_length; plt_width; plt_height]
    D_weir ← D_nominal(D_weir, PipeSpecification)
    return [lvltank_dim/m, D_weir/m, H_weir/m, HW_plantleveling/m]  # error: This variable is undefined.
# Water level in the leveling plant is assumed to be equal to the water level in the channel minus the head loss through the launder
# An estimated weir height is determined by substracting the assumed water height on top of the weir from the water level in the leveling tank
# The weir equation is used to determine the nominal size for the diameter of the weir
# Using the pipe database file, and given the schedule of the pipe, the actual inner diameter of the pipe is determined
# The actual weir height is determined using the actual inner diameter of the pipe and the weir equation
plt_height
# Height of the wall for the leveling tank =height of the wall for the channel
plt_width
# Inner width of the leveling tank is equal to the diameter of the chlorine container minus the diameter of the weir plus the sum of the diameter for one of the launders and the diameter of the weir
plt_length
# Inner length is equal to the sum of the diameters of the launders and the weir
