# AguaClara Design Tool
# [reference: BasicInputs- hmr6_Jalaca.xmcd]
N_SedTanks = 2
# [reference: DesignAssumptions.xmcd]
# [reference: MathFunctions.xmcd]
# [reference: PipeDatabase.xmcd]
# [reference: MinorLossCoefficients.xmcd]
# [reference: FluidsFunctions.xmcd]
# [reference: Sedimentation Tank.xmcd]
# [reference: Floc Hopper - New Design.xmcd]
# [reference: FCM.xmcd]
# [reference: Flocculator 3 mas 352.xmcd]
# [reference: RapidMixer.xmcd]
# [reference: EntranceTankDim.xmcd]
HW_FlocEnd = 1.65618 m
# [reference: Materials List.xmcd]
# [reference: AutoCADMasterProgram.xmcd]
N_SedBays = 1
# This file must have at least one variable displayed otherwise it doesn't recalculate and it claims that all variables are undefined.
L_Sed = 3.70286 m
AC_FlocTank = [
    "-layer m floctank";
    "c t 91,91,91";
    "floctank";
    "  ";
    "_-view o t _zoom w 0.16,2.14,0 -3.86286,4.91,1.88952 _box 0,2.3,0 -3.70286,4.75,1.88952 _box 0.15,2.15,-0.15 -3.85286,4.9,1.88952 _subtract 0.15,2.15,-0.15  0,2.3,0 ";
    "_box -3.85286,2.8,0 0.15,2.95,1.88952";
    "_box -0.07058,2.8,0.85419 0,2.95,0";
    "_subtract -3.85286,2.8,0  -0.07058,2.8,0.85419 ";
    "_box -3.85286,3.45,0 0.15,3.6,1.88952";
    "_box -3.70286,3.45,0.85419 -3.63227,3.6,0"
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]
AC_SedTank = [
    "_-view o t"; "-layer m tank"; "c t 132,132,132"; "tank"; "  "; "_-view o t _zoom w 0.16,-0.16,0 -3.86286,1.16,1.75618 _box 0,0,0 -3.70286,1,1.75618 _box 0.15,-0.15,-0.15 -3.85286,1.15,1.75618 _subtract 0.15,-0.15,-0.15  0,0,0 "; "-layer s 0"; "  "; "-layer f tank"; "  "
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]
# [component: inputs AC_SedTank]
# [component: inputs AC_FlocTank]
