# Draws the control piece to plug into the inlet chimney coupling to stop the flow of water through the chimney and into the sedimentation tank. The control piece consists of a PVC pipe with an outer radius equal to the inner radius of the coupling socket, a cap covering the top of the PVC pipe, and a small tube drilled into the roof of the cap so that air can escape from inside.
ID_tube := 1 in
# still doing research to get information on this
chimneystopscript(o, outerradiuspipe, innerradiuspipe, L_pipe, couplingsocketdepth, outerradiuscap, innerradiuscap, IH_cap, outerradiustube, innerradiustube, L_tube) :=
    zoom ← zoom_win([o[0] - outerradiuspipe; o[1] + outerradiuspipe; o[2]], [o[0] + outerradiuspipe; o[1] - outerradiuspipe; o[2]])
    cylinder1 ← cylinderC(o, outerradiuspipe, L_pipe)
    cylinder2 ← cylinderC([o[0]; o[1]; o[2] - zc], innerradiuspipe, L_pipe + 2*zc)
    subtract1 ← subtractD([o[0] - outerradiuspipe; o[1]; o[2]], [o[0] - innerradiuspipe; o[1]; o[2]])
    union1 ← union_allA
    zoom ← zoom_win([o[0] - outerradiuscap; o[1] + outerradiuscap; o[2]], [o[0] + outerradiuscap; o[1] - outerradiuscap; o[2]])
    cylinder3 ← cylinderC([o[0]; o[1]; o[2] + couplingsocketdepth + zc], outerradiuscap, IH_cap)
    cylinder4 ← cylinderC([o[0]; o[1]; o[2] + couplingsocketdepth], innerradiuscap, IH_cap + 2*zc)
    zoom ← zoom_win([o[0] - outerradiuscap; o[1] + outerradiuscap; o[2]], [o[0] + outerradiuscap; o[1] - outerradiuscap; o[2]])
    subtract2 ← subtractD([o[0] - outerradiuscap; o[1]; o[2] + couplingsocketdepth], [o[0] - innerradiuscap; o[1]; o[2] + couplingsocketdepth])
    topcylinder ← cylinderC([o[0]; o[1]; (o[2] + couplingsocketdepth + IH_cap)], outerradiuscap, outerradiuscap - innerradiuscap)
    cylinder5 ← cylinderC([o[0]; o[1]; o[2] + couplingsocketdepth + IH_cap - zc], outerradiustube, L_tube + 2*zc)
    union2 ← union_allA
    cylinder6 ← cylinderC([o[0]; o[1]; o[2] + couplingsocketdepth + IH_cap - 2*zc], innerradiustube, L_tube + 3*zc)
    subtract3 ← subtractD([o[0] - outerradiustube; o[1]; o[2] + IH_cap + couplingsocketdepth], [o[0] - innerradiustube; o[1]; o[2] + IH_cap + couplingsocketdepth])
    union3 ← union_allA
    one ← stack(zoom, cylinder1, cylinder2, subtract1, union1, zoom, cylinder3, cylinder4, zoom, subtract2, topcylinder, cylinder5, union2, cylinder6, subtract3, union3)
    return one  # error: This variable is undefined.
# Draw pipe to fit into coupling socket
# Draw cap to fit over top of pipe
# Draw tube to extend out of the cap to allow outflow of air
chimneystop(o, ID_pipe, HW_InletChannel, ID_tube, EN) := chimneystopscript([o[0]; o[1]; o[2]], outerradius(NominalPipeSize(ID_pipe)), innerR(ID_pipe, EN), CapHeight(NominalPipeSize(ID_pipe)) - (CapDiameter(NominalPipeSize(ID_pipe))/2 - outerradius(NominalPipeSize(ID_pipe))) + SocketDepth(ID_pipe), SocketDepth(ID_pipe), CapDiameter(NominalPipeSize(ID_pipe))/2, outerradius(NominalPipeSize(ID_pipe)), CapHeight(NominalPipeSize(ID_pipe)) - (CapDiameter(NominalPipeSize(ID_pipe))/2 - outerradius(NominalPipeSize(ID_pipe))), outerradius(NominalPipeSize(ID_tube)), innerR(ID_tube, EN), HW_InletChannel + 4 in)  # error: This variable is undefined.
(o, outerradiuspipe, innerradiuspipe, L_pipe, couplingsocketdepth, outerradiuscap, innerradiuscap, L_cap, outerradiustube, innerradiustube, L_tube)
