# AguaClara Water Treatment Plants
# Automated Design
# Add variable descriptions next to every varible so it is easy to interpret what this all means.
# Design References
# [reference: BasicInputs- rb563.xmcd]
# Use BasicClientInputs and ExpertClientInputs when this is run by LabVIEW.
# Use BasicInputs and ExpertInputs to use the program in MathCAD
# Change the reference by
# - right clicking
# - select properties
# - reference tab
# - type in the correct file name
# [reference: DesignAssumptions.xmcd]
# [reference: MathFunctions.xmcd]
# [reference: PipeDatabase.xmcd]
# [reference: MinorLossCoefficients.xmcd]
# [reference: FluidsFunctions.xmcd]
# [reference: Sedimentation Tank-rb563.xmcd]
# [reference: Floc Hopper - New Design.xmcd]
# [reference: FCM.xmcd]
# [reference: Flocculator 3.xmcd]
# [reference: RapidMixer.xmcd]
# [reference: EntranceTankDim.xmcd]
# [reference: Materials List.xmcd]
# Sed Tanks and Slopes:
N_SedTanks = 3
H_SedBetween = 1.7233 cm  # Distance from the top of the inlet manifold to the bottom of the ledge supporting the lamella frame
L_Sed = 8.22857 m
N_SedBays = 2  # Number of bays of inlet manifolds in each sed tank
Q_SedBay = 6.66667 L/s
# Sedimentation Tank Sludge Drain:
N_SedSludgeOrifices = 83  # per cell
Ti_SludgeDrain = 10 min  # Tank Drain time
W_SedSludge = 21.8365 cm  # Width of the sludge channel
B_SedSludgeOrifices = 9.87065 cm  # Distance center to center between drain orifices
H_SedSludge = 10.9182 cm  # Depth of the sludge channel
T_SedSludge = 7.95912 cm
T_SedSludge = 7.95912 cm
# Thickness of the plate topping the sludge channel
# through which drain holes are formed
W_SedDrainCover = 31.8365 cm
D_SedSludgeOrifice = 0.016 m  # Diameter of drain orifices
W_SedInletBottom = 0.340818 m
N_SedSludgeOrifices = 83
ND_SedSludgeValve = 4 in
# Sedimentation Tank Dimensions:
Z_SedSludge = 0.188774 m  # Height from 0 of the top of the sludge drain
H_SedBottomSlope =  # error: This variable is undefined.  # Height of the bottom slope
H_SedTopSlope =  # error  # Height of the top of the inlet manifold
Z_SedSlopes = 0.735786 m  # Height from 0 of the top of the inlet manifold
W_Sed = 2 m  # Total tank wall height
L_Sed = 8.22857 m  # Total tank length
# Inlet Channel:
HW_InletChannel = 0.263288 m  # Width of the drop chimneys connecting channel to sed inlet manifolds
W_InletChannel = 0.565531 m  # length of drop chimmneys
L_Channel = 6.6 m
W_SedManifoldEntrance =  # error
L_SedManifoldEntrance =  # error
H_SedManifoldPort =  # error  # Ports at bottom of inlet chimney are set to be triangles
W_SedManifoldPort =  # error
N_SedInletPipes = 2  # per sed bay
H_InletChannel = 0.363288 m
# Sedimentation Tank Effluent Launder:
N_SedLaunderOrifices = 122  # Number of orifices per launder
Q_SedLaunderOrifices = 2.76406e-5 m^3/s  # More Launder Dimensions
ND_SedLaunder = 6 in
B_SedLaunderOrifices = 0.110128 m  # Center to center launder spacing
L_SedLaunder = 6.70984 m
# Exit Channel:
D_SedLaunderOrifice = 0.314961 in
W_ExitChannel = 0.526201 m
H_ExitChannel = 0.363288 m
L_ExitChannel = 6.6 m
H_PltWeir =  # error  # height of the weir carrying water to the distribution tank
HW_ExitChannel = 0.223288 m  # water height in exit channel from 0
# Lamella:
L_SedPlate = 0.4572 m
B_SedPlate = 2.57417 cm  # center to center distance between lamella
S_SedPlate = 2 cm  # spacing between lamella
N_SedPlates = 227  # Number of Sed Plates per Sedimentation Tank Bay.
AN_SedPlate = 60 deg
V_SedC = 8.9102 m/day
L_SedActive = 6.71781 m
T
V_SedUp = 70 m/day
Z_SedLaunder = 1.2999 m
H_SedPlate = 0.395947 m
H_SedAbove = 0.207119 m  # Height of water needed above the lamella
N_SedPlates = 227
HW_Sed = 1.42289 m
H_Sed = 1.52289 m
Z_Mp = 1.1596 m
H_SedBayDivider = 0.753019 m
# Sedimentation Tank Floc Hopper:
A_FlocHopper =  # error
L_FlocHopper =  # error  # Length of the hopper cement plate
L_FlocHopperOffset = 0.2286 m  # distance from the edge of the channel to the bottom of the first lamella (collection distance)
W_FlocHopper =  # error  # width of the hopper set within each bay
# Flow Controller:
N_Fcm = 5
ID_FcmTube = 4.318 mm
ID_FcmTube = 0.17 in
L_FcmTube = 268.292 cm
Q_FcmTubeMax = 360 mL/min
HL_FcmValve = 24.0782 cm
# Flocculator: | Look at Flocculator Positioning arrays
W_FlocChannel = 0.795813 m
# Fill last channel with bafffles from last channel
# Fix port width to be based on energy dissipation in that channel
ED_Floc = 6 mW/kg
# Adjust spacing after the number of baffles per channel is known.
# Check the residence time of the flocculator should be at least 20minutes
HW_FlocEnd = 1.42289 m
X_FlocBaffles = [
    0.476786, 0.476786, 0.476786, 0.511238;
    0.993571, 0.993571, 0.993571, 1.06248;
    1.51036, 1.51036, 1.51036, 1.61371;
    2.02714, 2.02714, 2.02714, 2.16495;
    2.54393, 2.54393, 2.54393, 2.71619;
    3.06071, 3.06071, 3.06071, 3.26743;
    3.5775, 3.5775, 3.5775, 3.81867;
    4.09429, 4.09429, 4.09429, 4.3699;
    4.61107, 4.61107, 4.61107, 4.92114;
    5.12786, 5.12786, 5.12786, 5.47238;
    5.64464, 5.64464, 5.64464, 6.02362;
    6.16143, 6.16143, 6.16143, 6.57486;
    6.67821, 6.67821, 6.67821, 7.1261;
    7.195, 7.195, 7.195, 7.67733;
    7.71179, 7.71179, 7.71179, 0
] m
L_FlocBaffles = [
    0.884122, 0.884122, 0.884122, 1.21459;
    1.24905, 1.24905, 1.24905, 0.84967;
    0.884122, 0.884122, 0.884122, 1.21459;
    1.24905, 1.24905, 1.24905, 0.84967;
    0.884122, 0.884122, 0.884122, 1.21459;
    1.24905, 1.24905, 1.24905, 0.84967;
    0.884122, 0.884122, 0.884122, 1.21459;
    1.24905, 1.24905, 1.24905, 0.84967;
    0.884122, 0.884122, 0.884122, 1.21459;
    1.24905, 1.24905, 1.24905, 0.84967;
    0.884122, 0.884122, 0.884122, 1.21459;
    1.24905, 1.24905, 1.24905, 0.84967;
    0.884122, 0.884122, 0.884122, 1.21459;
    1.24905, 1.24905, 1.24905, 0.84967;
    0.884122, 0.884122, 0.884122, 0
] m
Z_FlocBaffles = [
    0, 0, 0, 0.511238;
    0.476786, 0.476786, 0.476786, 0;
    0, 0, 0, 0.511238;
    0.476786, 0.476786, 0.476786, 0;
    0, 0, 0, 0.511238;
    0.476786, 0.476786, 0.476786, 0;
    0, 0, 0, 0.511238;
    0.476786, 0.476786, 0.476786, 0;
    0, 0, 0, 0.511238;
    0.476786, 0.476786, 0.476786, 0;
    0, 0, 0, 0.511238;
    0.476786, 0.476786, 0.476786, 0;
    0, 0, 0, 0.511238;
    0.476786, 0.476786, 0.476786, 0;
    0, 0, 0, 0
] m
N_FlocChannels = 4
L_FlocTank = 32.9143 m
HL_Floc = 25.2946 cm
HW_FlocStart = 1.67583 m
S_FlocBaffle = [47.6786; 47.6786; 47.6786; 51.1238] cm
B_FlocBaffle = [51.6786; 51.6786; 51.6786; 55.1238] cm
N_FlocChannelBaffles = [15; 15; 15; 14]
W_FlocPort = [0.426786; 0.426786; 0.426786; 0.461238] m
HL_FlocChannels = [6.53491; 6.53491; 6.53491; 5.68985] cm
L_FlocBaffleLower = [0.884122; 0.884122; 0.884122; 0.84967] m
L_FlocBaffleUpper = [1.24905; 1.24905; 1.24905; 1.21459] m
H_FlocPort = [0.889047; 0.889047; 0.889047; 0.882083] m
Ti_Floc = 15.5294 min  # residence time of the flocculator
N_FlocBaffles = 59
# Rapid Mix Unit and Entrance Tank:
L_Et = 2.22197 m
W_Et = 2.22197 m
H_Et = 2.07583 m  # Height of Entrance Tank Orifice
W_EtOrifice[30] = 0.031 m
L_trueET[30] = 1.03411 m  # Length of Entrance Tank Orifice
Pi_EtFlow[30] = 0.278388  # Ratio of the minimum flow divided by the maximum flow through the plant.
L_FlocEntryOrifice = 79.5813 cm  # Length of orifice entering into flocculator from Rapid Mix Unit
W_FlocEntryOrifice = 38.5529 cm  # Height of orifice entering into flocculator
ED_Diffusion =  # error  # Minimum Energy Dissipation needed
HL_FlocEntryOrifice = 0.129334 cm  # Head loss caused by entering flocculation tank.
A_FlocEntry = 0.306809 m^2
A_EtOrifice = 320.575 cm^2
HW_EtTotal =  # error  # Total Height of water at beginning of rapid mix unit
HW_Channel2 =  # error  # Height of water at the back of the entrance tank channel (from channel bottom)
HW_EtChannel = 5.81966 cm  # Height of Waterfall into flocculator
W_EtChannel = 47.6786 cm  # Widt of entrance tank channel
Vol_Stock = 3240 L  # Volume of chemical stock tanks
ZW_ExitChannel =  # error  # Water Level at the end of the plant in the exit channel and exit channel box
HW_Sed = 1.42289 m
HW_FlocStart = 1.67583 m  # Water level at the beginning of the floc tank
HL_Floc = 25.2946 cm  # just for ref. the head loss throught the floc tank
HW_EtTotal =  # error  # Height of the water in the entrance channel
# Materials List:
L_LaunderPipe =  # error
N_Launders = 12
L_LaunderPipeTotal = 80.5181 m
N_Valves = 6
N_LaunderCouplings = 12
N_ValveCouplings = 6
N_SedPlatesTotal = 1362
N_SedPlatesPerSheet = 8
N_SedPlateSheets = 171
N_PipeSedPlateStand =  # error
A_SedTank =  # error
# [reference: AutoCADMasterProgram.xmcd]
# AutoCAD References
AC_SedTank =  # error
AC_EntranceTank = [
    "-layer m entrancetank";
    "c t 214,214,214";
    "entrancetank";
    "  ";
    "_-view o t _zoom w 0.16,10.07325,0 -2.38197,12.61522,2.07583 _box 0,10.23325,0 -2.22197,12.45522,2.07583 _box 0.15,10.08325,-0.15 -2.37197,12.60522,2.07583 _subtract 0.15,10.08325,-0.15  0,10.23325,0 ";
    "-layer s 0";
    "  ";
    "-layer f entrancetank";
    "  ";
    "-layer s entrancetank";
    "  ";
    "_box -2.22197,10.08325,2.02583 -1.74518,10.23325,2.07583";
    "-layer s 0";
    "  ";
    "-layer t entrancetank";
    "  ";
    "_-view o t";
    "_subtract 0.15,10.23325,0  -2.22197,10.08325,2.02583 ";
    "-layer f entrancetank";
    "  "
]
AC_FlocTank = [
    "-layer m floctank";
    "c t 91,91,91";
    "floctank";
    "  ";
    "_-view o t _zoom w 0.16,6.29,0 -8.38857,10.24325,1.77583 _box 0,6.45,0 -8.22857,10.08325,1.77583 _box 0.15,6.3,-0.15 -8.37857,10.23325,1.77583 _subtract 0.15,6.3,-0.15  0,6.45,0 ";
    "_box -8.37857,7.24581,0 0.15,7.39581,1.77583";
    "_box -0.42679,7.24581,0.88905 0,7.39581,0";
    "_subtract -8.37857,7.24581,0  -0.42679,7.24581,0.88905 ";
    "_box -8.37857,8.19163,0 0.15,8.34163,1.77583";
    "_box -8.22857,8.19163,0.88905 -7.80179,8.34163,0"
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]
