# AguaClara Water Treatment Plants
# Automated Design
# Add variable descriptions next to every varible so it is easy to interpret what this all means.
# Design References
# [reference: BasicInputs- hmr6.xmcd]
# Use BasicClientInputs and ExpertClientInputs when this is run by LabVIEW.
# Use BasicInputs and ExpertInputs to use the program in MathCAD
# Change the reference by
# - right clicking
# - select properties
# - reference tab
# - type in the correct file name
B_SedPlateFramePipes = 0.3 m
# [reference: DesignAssumptions.xmcd]
# [reference: MathFunctions.xmcd]
# [reference: PipeDatabase.xmcd]
Q_Plant = 10 L/s
# [reference: MinorLossCoefficients.xmcd]
# [reference: FluidsFunctions.xmcd]
# [reference: Sedimentation Tank.xmcd]
# [reference: Floc Hopper - New Design.xmcd]
# [reference: FCM.xmcd]
# [reference: Flocculator 3.xmcd]
# [reference: RapidMixer.xmcd]
# [reference: EntranceTankDim.xmcd]
# [reference: Materials List.xmcd]
W_SedBay = 1 m
N_SedTanks = 2
W_ExitChannelMin = 0.254 m
W_SedBay = 1 m
N_SedBays = 2
# Sed Tanks and Slopes:
Geom_ExitChannel = 0
B_SedPort =  # error: This variable is undefined.  # Height of the narrowest part of the manifold ports
N_SedTanks = 2
W_SedPort =  # error
H_SedBetween = 0 cm  # Distance from the top of the inlet manifold to the bottom of the ledge supporting the lamella frame
A_SedPort =  # error  # Port Area
L_Sed = 3.08571 m
W_SedSludgeFlat =  # error  # Distance between tips of manifold plates (space alloted for the drain holes
N_SedBays = 2  # Number of bays of inlet manifolds in each sed tank
AN_SedTopInlet =  # error  # Angle of the top of the inlet manifold
L_SedPort =  # error  # Length of the port through which water exits the inlet manifold
AN_SedBottom =  # error  # Angle of the bottom of inlet manifold
W_SedSlopePlate =  # error  # Width of ferrous cement plates in whice one manifold port is cut
Q_SedBay = 2.5 L/s
W_SedBayActual =  # error
L_SedSlopeManifold =  # error  # This is the extra distance between the last slope and the wall
# Sedimentation Tank Sludge Drain:
N_SedSludgeOrifices = 36  # per cell
Ti_SludgeDrain = 10 min  # Tank Drain time
W_SedSludge = 13.0544 cm  # Width of the sludge channel
B_SedSludgeOrifices = 8.55243 cm  # Distance center to center between drain orifices
H_SedSludge = 6.52721 cm  # Depth of the sludge channel
T_SedSludge = 5.76361 cm
T_SedSludge = 5.76361 cm
# Thickness of the plate topping the sludge channel
# through which drain holes are formed
W_SedDrainCover = 23.0544 cm
D_SedSludgeOrifice = 0.015 m  # Diameter of drain orifices
W_SedInletBottom = 0.384728 m
N_SedSludgeOrifices = 36
ND_SedSludgeValve = 3 in
# Sedimentation Tank Dimensions:
Z_SedSludge = 0.122908 m  # Height from 0 of the top of the sludge drain
H_SedBottomSlope =  # error  # Height of the bottom slope
H_SedTopSlope =  # error  # Height of the top of the inlet manifold
Z_SedSlopes = 0.745975 m  # Height from 0 of the top of the inlet manifold
W_Sed = 2 m  # Total tank wall height
L_Sed = 3.08571 m  # Total tank length
# Inlet Channel:
HW_InletChannel = 0.235348 m  # Width of the drop chimneys connecting channel to sed inlet manifolds
W_InletChannel = 0.44862 m  # length of drop chimmneys
L_Channel = 4.45 m
W_SedManifoldEntrance =  # error
L_SedManifoldEntrance =  # error
H_SedManifoldPort =  # error  # Ports at bottom of inlet chimney are set to be triangles
W_SedManifoldPort =  # error
N_SedInletPipes = 2  # per sed bay
H_InletChannel = 0.335348 m
# Sedimentation Tank Effluent Launder:
N_SedLaunderOrifices = 38  # Number of orifices per launder
Q_SedLaunderOrifices = 3.45055e-5 m^3/s  # More Launder Dimensions
ND_SedLaunder = 3 in
B_SedLaunderOrifices = 0.1 m  # Center to center launder spacing
L_SedLaunder = 2.23309 m
# Exit Channel:
D_SedLaunderOrifice = 0.354331 in
W_ExitChannel = 0.254 m
H_ExitChannel = 0.335348 m
L_ExitChannel = 4.45 m
H_PltWeir = 0.153055 m  # height of the weir carrying water to the distribution tank
HW_ExitChannel = 0.195348 m  # water height in exit channel from 0
# Lamella:
L_SedPlate = 0.6096 m
B_SedPlate = 2.56603 cm  # center to center distance between lamella
S_SedPlate = 2 cm  # spacing between lamella
N_SedPlates = 66  # Number of Sed Plates per Sedimentation Tank Bay.
AN_SedPlate = 60 deg
ZW_ExitChannel =  # error
V_SedC = 8.92201 m/day
L_SedActive = 1.93376 m
T
V_SedUp = 70 m/day
Z_SedLaunder = 1.38516 m
H_SedPlate = 0.527929 m
H_SedAbove = 0.126692 m  # Height of water needed above the lamella
N_SedPlates = 66
HW_Sed = 1.4674 m
H_Sed = 1.5674 m
Z_Mp = 1.23205 m
N_SedPorts =  # error
H_SedBayDivider = 0.745975 m
W_SedSlopePlateRemaining =  # error
W_SedBayDivider =  # error
# Sedimentation Tank Floc Hopper:
A_FlocHopper =  # error
L_FlocHopper =  # error  # Length of the hopper cement plate
L_FlocHopperOffset = 0.3048 m  # distance from the edge of the channel to the bottom of the first lamella (collection distance)
W_FlocHopper =  # error  # width of the hopper set within each bay
# Flow Controller:
N_Fcm = 2
ID_FcmTube = 3.175 mm
ID_FcmTube = 0.125 in
L_FcmTube = 125.479 cm
Q_FcmTubeMax = 225 mL/min
HL_FcmValve = 9.40555 cm
# Flocculator: | Look at Flocculator Positioning arrays
W_FlocChannel = 0.5 m
# Fill last channel with bafffles from last channel
# Fix port width to be based on energy dissipation in that channel
ED_Floc = 6 mW/kg
# Adjust spacing after the number of baffles per channel is known.
# Check the residence time of the flocculator should be at least 20minutes
HW_FlocEnd = 1.4674 m
X_FlocBaffles = [
    0.183265, 0.183265, 0.183265, 0.183265, 0.183265, 0.49862;
    0.406531, 0.406531, 0.406531, 0.406531, 0.406531, 0.761268;
    0.629796, 0.629796, 0.629796, 0.629796, 0.629796, 1.02392;
    0.853061, 0.853061, 0.853061, 0.853061, 0.853061, 1.28656;
    1.07633, 1.07633, 1.07633, 1.07633, 1.07633, 1.54921;
    1.29959, 1.29959, 1.29959, 1.29959, 1.29959, 1.81186;
    1.52286, 1.52286, 1.52286, 1.52286, 1.52286, 2.07451;
    1.74612, 1.74612, 1.74612, 1.74612, 1.74612, 2.33715;
    1.96939, 1.96939, 1.96939, 1.96939, 1.96939, 2.5998;
    2.19265, 2.19265, 2.19265, 2.19265, 2.19265, 2.86245;
    2.41592, 2.41592, 2.41592, 2.41592, 2.41592, 0;
    2.63918, 2.63918, 2.63918, 2.63918, 2.63918, 0;
    2.86245, 2.86245, 2.86245, 2.86245, 2.86245, 0
] m
L_FlocBaffles = [
    1.16762, 1.16762, 1.16762, 1.16762, 1.16762, 1.46878;
    1.48595, 1.48595, 1.48595, 1.48595, 1.48595, 1.15044;
    1.16762, 1.16762, 1.16762, 1.16762, 1.16762, 1.46878;
    1.48595, 1.48595, 1.48595, 1.48595, 1.48595, 1.15044;
    1.16762, 1.16762, 1.16762, 1.16762, 1.16762, 1.46878;
    1.48595, 1.48595, 1.48595, 1.48595, 1.48595, 1.15044;
    1.16762, 1.16762, 1.16762, 1.16762, 1.16762, 1.46878;
    1.48595, 1.48595, 1.48595, 1.48595, 1.48595, 1.15044;
    1.16762, 1.16762, 1.16762, 1.16762, 1.16762, 1.46878;
    1.48595, 1.48595, 1.48595, 1.48595, 1.48595, 1.15044;
    1.16762, 1.16762, 1.16762, 1.16762, 1.16762, 0;
    1.48595, 1.48595, 1.48595, 1.48595, 1.48595, 0;
    1.16762, 1.16762, 1.16762, 1.16762, 1.16762, 0
] m
Z_FlocBaffles = [
    0, 0, 0, 0, 0, 0.222648;
    0.183265, 0.183265, 0.183265, 0.183265, 0.183265, 0;
    0, 0, 0, 0, 0, 0.222648;
    0.183265, 0.183265, 0.183265, 0.183265, 0.183265, 0;
    0, 0, 0, 0, 0, 0.222648;
    0.183265, 0.183265, 0.183265, 0.183265, 0.183265, 0;
    0, 0, 0, 0, 0, 0.222648;
    0.183265, 0.183265, 0.183265, 0.183265, 0.183265, 0;
    0, 0, 0, 0, 0, 0.222648;
    0.183265, 0.183265, 0.183265, 0.183265, 0.183265, 0;
    0, 0, 0, 0, 0, 0;
    0.183265, 0.183265, 0.183265, 0.183265, 0.183265, 0;
    0, 0, 0, 0, 0, 0
] m
N_FlocChannels = 6
L_FlocTank = 18.5143 m
HL_Floc = 15.182 cm
HW_FlocStart = 1.61922 m
S_FlocBaffle = [18.3265; 18.3265; 18.3265; 18.3265; 18.3265; 22.2648] cm
B_FlocBaffle = [22.3265; 22.3265; 22.3265; 22.3265; 22.3265; 26.2648] cm
N_FlocChannelBaffles = [13; 13; 13; 13; 13; 10]
W_FlocPort = [0.133265; 0.133265; 0.133265; 0.133265; 0.133265; 0.15044] m
HL_FlocChannels = [2.6778; 2.6778; 2.6778; 2.6778; 2.6778; 1.79305] cm
L_FlocBaffleLower = [1.16762; 1.16762; 1.16762; 1.16762; 1.16762; 1.15044] m
L_FlocBaffleUpper = [1.48595; 1.48595; 1.48595; 1.48595; 1.48595; 1.46878] m
H_FlocPort = [0.687596; 0.687596; 0.687596; 0.687596; 0.687596; 0.66618] m
Ti_Floc = 22.6399 min  # residence time of the flocculator
N_FlocBaffles = 75
# Rapid Mix Unit and Entrance Tank:
L_Et = 1.11098 m
W_Et = 1.11098 m
H_Et = 2.01922 m  # Height of Entrance Tank Orifice
W_EtOrifice[30] = 0.031 m
L_trueET[30] = 0.258528 m  # Length of Entrance Tank Orifice
Pi_EtFlow[30] = 0.278388  # Ratio of the minimum flow divided by the maximum flow through the plant.
L_FlocEntryOrifice = 50 cm  # Length of orifice entering into flocculator from Rapid Mix Unit
W_FlocEntryOrifice = 18.7002 cm  # Height of orifice entering into flocculator
ED_Diffusion =  # error  # Minimum Energy Dissipation needed
HL_FlocEntryOrifice = 0.087035 cm  # Head loss caused by entering flocculation tank.
A_FlocEntry = 0.0935011 m^2
A_EtOrifice = 80.1436 cm^2
HW_EtTotal =  # error  # Total Height of water at beginning of rapid mix unit
HW_Channel2 =  # error  # Height of water at the back of the entrance tank channel (from channel bottom)
HW_EtChannel = 4.36871 cm  # Height of Waterfall into flocculator
W_EtChannel = 18.3265 cm  # Widt of entrance tank channel
Vol_Stock = 810 L  # Volume of chemical stock tanks
ZW_ExitChannel =  # error  # Water Level at the end of the plant in the exit channel and exit channel box
HW_Sed = 1.4674 m
HW_FlocStart = 1.61922 m  # Water level at the beginning of the floc tank
HL_Floc = 15.182 cm  # just for ref. the head loss throught the floc tank
HW_EtTotal =  # error  # Height of the water in the entrance channel
# Materials List:
L_LaunderPipe =  # error
N_Launders = 8
L_LaunderPipeTotal = 17.8648 m
N_Valves = 4
N_LaunderCouplings = 8
N_ValveCouplings = 4
N_SedPlatesTotal = 264
N_SedPlatesPerSheet = 6
N_SedPlateSheets = 44
N_PipeSedPlateStand =  # error
A_SedTank =  # error
# [reference: AutoCADMasterProgram.xmcd]
# AutoCAD References
AC_SedTank = [
    "_-view o t"; "-layer m tank"; "c t 132,132,132"; "tank"; "  "; "_-view o t _zoom w 0.16,-0.16,0 -6.33143,5.16,1.73905 _box 0,0,0 -6.17143,5,1.73905 _box 0.15,-0.15,-0.15 -6.32143,5.15,1.73905 _subtract 0.15,-0.15,-0.15  0,0,0 "; "-layer s 0"; "  "; "-layer f tank"; "  "
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]
AC_EntranceTank = [
    "-layer m entrancetank";
    "c t 214,214,214";
    "entrancetank";
    "  ";
    "_-view o t _zoom w 0.16,24.34,0 -3.67324,28.17324,2.01922 _box 0,24.5,0 -3.51324,28.01324,2.01922 _box 0.15,24.35,-0.15 -3.66324,28.16324,2.01922 _subtract 0.15,24.35,-0.15  0,24.5,0 ";
    "-layer s 0";
    "  ";
    "-layer f entrancetank";
    "  ";
    "-layer s entrancetank";
    "  ";
    "_box -3.51324,24.35,1.96922 -3.32997,24.5,2.01922";
    "-layer s 0";
    "  ";
    "-layer t entrancetank";
    "  ";
    "_-view o t";
    "_subtract 0.15,24.5,0  -3.51324,24.35,1.96922 ";
    "-layer f entrancetank";
    "  "
]
AC_FlocTank = [
    "-layer m floctank";
    "c t 91,91,91";
    "floctank";
    "  ";
    "_-view o t _zoom w 0.16,4.14,0 -3.24571,8.21,1.71922 _box 0,4.3,0 -3.08571,8.05,1.71922 _box 0.15,4.15,-0.15 -3.23571,8.2,1.71922 _subtract 0.15,4.15,-0.15  0,4.3,0 ";
    "_box -3.23571,4.8,0 0.15,4.95,1.71922";
    "_box -0.13327,4.8,0.6876 0,4.95,0";
    "_subtract -3.23571,4.8,0  -0.13327,4.8,0.6876 ";
    "_box -3.23571,5.45,0 0.15,5.6,1.71922";
    "_box -3.08571,5.45,0.6876 -2.95245,5.6,0"
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]
