# [reference: MasterProgram.xmcd]
# Flocculation Drain
L_FlocDrainChannel := L_FlocTank/N_FlocChannels
H_FlocDrain
W_FlocDrain := W_FlocChannel*N_FlocChannels + T_PlantWall*(N_FlocChannels + 1) = 4.49606 m
S_FlocDrainChannel
H_FlocDrainChannel
A_FlocDrainChannel
