# Channel Design
# [reference: FluidsFunctions.xmcd]
# [reference: DesignAssumptions.xmcd]
# [reference: Launder.xmcd]
# Should we add a reference to the Channel function? Otherwise I do not know where HLlaunorf is.
# Headloss (HL.laundertotal) is caculated in a function in the launder design program, and is based on the total headloss through all launders and launder orifices from the sedtank to the plant leveling tank
Channel(Q_plant, SedTank_width, tank_thick, n_sedtanks, HL_laundertotal) :=
    height_channel ← HW_channel + HL_laundertotal + freeboard_channel
    HW_PLT ← HW_channel - HL_laundertotal
    b ← (1/G_cell)^(1/2)*(Q_plant/height_channel)^(3/4)*(K_90/(2*ν*Π_cell))^(1/4)
    width_channel ← Π_cell*b
    length_channel ← n_sedtanks*SedTank_width + 2*tank_thick
    channel_dim ← [length_channel; width_channel; height_channel]
    return [channel_dim, HW_PLT]
# The water height in the platn leveling tank is determined by the water level in the
# channel and the total head loss through the sed tank.
# The width of the channel is a function of the Gcell average we want to maintain the losses from 90 degree turns and the energy dissapation zone (Π_cell)
# The length is based on the side of the sed tank
# The depth of the water in the leveling tank is set
# estimate of total head loss through each laudner
# The addtional freeboard above the expected water level
# G_cell is the average velocity gradient in the cell where the energy dissipation is assumed to be occuring. This is the desired velocity gradient for the end of the flocculation tank.
# K_90 is theThe loss coefficient for the channel transition.
# Π_cell is the length of the zone where the energy is dissipated. Assume that energy is dissipated in a zone is twice as long as the
# smallest dimension flow.
# Opening of channel height determines the height
# for theentire channel
