# Basis of Design Assumptions
# Used throughout program
ν := 1*10^-6*m^2/s  # The kinematic viscosity of water.
Re_pipetransition := 2100
ε_pvc := 0.12 mm
# Flocculation tank assumptions
# Sedimentation tank assumptions
α := 60 deg  # Degree lamella is installed relative to the horizontal (so flocs slide down lamella)
β := 45 deg  # Walls toward drain pipe sloped relative to the horizontal (so flocs slide down)
v_up := 100*m/day  # We assume critical velocity should be 10 m/day, but to allow for formation of sludge blanket we need an upflow velocity of 100m/day.
H_tank := 2 m
# Depth of sedimentation tank (from drain pipe to water surface) is the sum of the length of the lamella + space between lamella to bottom of the tank (spacebelow) + water on top of the lamella (spaceabove). We must ensure that the water on top of the lamella is enough to submerge the effluent launder carrying water to distribution.
n_sedtanks := 3
# Number of sedimentation tanks (to ensure currently reasonable dimensions, this might be a factor by which to enlarge the number of sedimentation tanks in the future.)
spaceabove := 0.25  # Ratio between water depth above plate settlers and launder spacing (to maintain uniform flow through plate settlers)
freeboard_sed := 10 cm  # Space between top of tank and water surface
# Sedtank Drain assumptions
L_sludgeports := 10 cm  # The orifice spacing in the sedimentation tank drainage
# Plant Leveling Tank assumptions
# H WallPLT
# Height of the wall for the leveling tank =height of the wall for the channel
# W.PLT
# Inner width of the leveling tank is equal to the diameter of the chlorine container
# L PLT
# Needs to accommodate the effluent launders from the sedimentation tanks
# Grit Chamber assumptions
A_ratio := 0.3
# The maximum inlet orifice area into a vertical pipe normalized by the pipe area. This prevents the orifice flow from becoming so large that the orifice flows interfere with each other. This estimate is based on experience we have at Ojojona, and may be revised as we build more of these flow measuring devices. The orfices should also be placed on one side of the pipe so that the orifice jets don't impinge on each other.
L_rmpipe := 2 m  # The total pipe length between the orifices and the flocculator (rapid mix pipe) .
n_elbowsgrit := 2
# Pipe connecting the Grit chamber to the floc tank has two elbows. Based on how the AutoCAD team draws this pipe. The minor loss coefficient for this is K.el90
n_tgrit := 1
# Pipe connecting the Grit chamber to the floc tank has one T. Based on how the AutoCAD team draws this pipe. The minor loss coefficient for this is either K.Tflowrun or K.Tflowbr
h_lmax := 20 cm  # Maximum water surface elevation in the entrance tank measured from the center of the orifices at the design plant flow rate.
K_orifice := 0.63  # The minor loss coefficient for an orifice is 0.63
# Channel assumptions
G_cell := 15/s
# The average velocity gradient in the cell where the energy
# dissipation is assumed to be occuring. This is the desired
# velocity gradient for the end of the flocculation tank.
k_cell := 3  # The loss coefficient for the channel transition.
w_channel := 30 cm  # Width of channel, based on construction constraints?
# The length of the zone where the energy is dissipated. Assume
# that energy is dissipated in a zone is twice as long as the
# smallest dimension flow.
Π_cell := 2
# Opening of channel height determines the height
# for theentire channel
# Individual K Values | Expansions | Contractions
K_el90 := 0.9
diamratio_exp0.75 := 0
diamratio_cont0.75 := 0
K_el45 := 0.45
diamratio_cont0.25 := 0
diamratio_exp0.25 := 0
K_gatevalve := 0.39
diamratio_cont0.5 := 0
diamratio_exp0.5 := 0
K_chkvalveconv := 4
K_chkvalveball := 4.5
K_exp0.75 := 0.18
K_exp0.25 := 0.25
K_cont0.5 := 0.33
K_globevalve := 10
K_anglevalve := 4.3
K_exp0.5 := 0.55
K_cont0.75 := 0.18
K_cont0.25 := 0.43
K_1 := 0
K_returnbend := 1.5
K_Tflowrun := 0.6
K_Tflowbr := 1.8
