# THIS CODE IS FOR UNTAPERED FLOCCULATION
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# [reference: BasicInputs.xmcd]
# [reference: ExpertInputs.xmcd]
# [reference: DesignAssumptions.xmcd]
# [reference: MathFunctions.xmcd]
# [reference: PipeDatabase.xmcd]
# [reference: MinorLossCoefficients.xmcd]
# [reference: FluidsFunctions.xmcd]
# [reference: Sedimentation Tank.xmcd]
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# The new flocculation model more carefully distinguishes between maximum and average energydissipation rates. The flocculators should be designed based on a maximum allowed energy dissipation rate to ensure that suboptimal geometry (high h/b ratios) doesn't result in excessively high energy dissipation rates that could break flocs. However, since this model is now incorporating the concept of a maximum energy dissipation rate the energy dissipation rate guidelines need to be increased to account for the distinction between average and maximum.
# Because we are now using the concept of a maximum energy dissipation rate it should be possible to directly incorporate results from laminar flow flocculators to produce guidelines on the maximum allowable energy dissipation rates. One caveat is that the turbulent flow energy dissipation rates are time averaged and it is not yet clear what the expected temporal variability is for turbulent flow energy dissipation rates.
# CFD results and functions | Ask Monroe for an explanation of this section.
Pi_JSGraph := 2 .. 40  # Used to create the graphs
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2^(1/3) = 1.25992
# This is the efficiency of the geometry
α_ψ(Pi_JS) := min(0.94, (4/Pi_JS)^(1/6))
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Pi_VenaContractaOrifice := 0.62
K_FlocBaffle := 2
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α_ε(Pi_JS) := max(2, 0.38^3/Pi_VenaContractaOrifice^4*2/K_FlocBaffle*Pi_JS)
# Changed the jet max energy dissipation rate coefficient from 0.34 to 0.38 to better match CFD results. This needs further verification by PIV, literature on plane jets, or CFD.
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ψ_P(J, S) := α_ψ(J/S)*J^(2/3)*(K_FlocBaffle/2)^(1/3)
# Determine whether to use horizontal or vertical.
# Generic
# Ρ
# S
# J
# Vertical
# Width
# Space
# Height
# Horizontal
# Height
# Space
# Width
# Change everything into generic variables so that they are less confusing and so we can easily calculate for both types of flocculators.
S_FlocBaffleMin := W_HumanMin = 0.45 m  # This constraint is set when a human needs to walk between baffles (i.e. when they can't be removed).
J(P, S) := P*S
# J is the length along which water flows. It is a multiple of the spacing between baffles. There is an optimal multiplier. The exact optimal number can be used for horizontal flocculation.
J_Min := J(Pi_JSOptimal, S_FlocBaffleMin) = 1.35 m
P_MaxHorizontal(Q, S, Pi_JS, ED, J) := Q/(S*(J*2*ED/(K_FlocBaffle*α_ε(Pi_JS)))^(1/3))
# This equation is from Monroe. The minimum spacing will give you the maximum height for horizontal. ED is energy dissipation.
HW_FlocEnd := HW_Sed = 1.78505 m  # Define the height of the water at the end of the flocculator as the same as the beginning of the sed tank.
P_MaxHorizontal(Q_Plant, S_FlocBaffleMin, Pi_JSOptimal, ED_Floc, J_Min) = 2.09119 m
# H.FlocOption = 0 if same as sed; -1 is minimum depth for horizontal flow or a positive number is the number a  user specified. These are set by the user. This specifies the actual length of the water in the flocculator vertically based on the user option. Note that there is a difference between "height" and "length". Since the flocculator can be elevated we refer to heights as actual elevations whereas lengths are just the measured length regardless of elevation. For instance, if there was a flocculator with 10 ft of water that was elevated 100 ft, the height is 110 ft, but the length is 10 ft.
P_FlocChannelHIteration1 :=
    HW_FlocEnd if H_FlocOption == 0
    P_MaxHorizontal(Q_Plant, S_FlocBaffleMin, Pi_JSOptimal, ED_Floc, J_Min) if H_FlocOption == -1
    H_FlocOption*m if H_FlocOption > 0
Q_MinHorizontal(P, S, Pi_JS, ED, J) := P*S*(J*2*ED/(K_FlocBaffle*α_ε(Pi_JS)))^(1/3)
# This is just the equation for P.MaxHorizontal above rearranged to find the minimum flow rate needed for horizontal flocculation at a given vertical length.
Q_MinHorizontal(P_FlocChannelHIteration1, S_FlocBaffleMin, Pi_JSOptimal, ED_Floc, J_Min) = 128.041 L/s
S_FlocBaffleNonIterative(Q, P, Pi_JS, ED) := (Q/P)^(3/4)*(1/Pi_JS)^(1/4)*(K_FlocBaffle*α_ε(Pi_JS)/(2*ED))^(1/4)
# This equation can be used to find the space between baffles when everything else is known.
N_FlocSpacesFH(L, T, S) := (Floor((L + T)/(S + T) + 1, 2) - 1)
# This gives the number of spaces per channel for a horizontal flocculator. Floor to ensure minimum spacing constraint met for horizontal. Subtracting 1 forces it to be odd. Add one before flooring though to get more accurate estimate.
SofN_FlocBaffleF(L, T, N_Spaces) := (L + T)/N_Spaces - T  # This calculates the spacing between baffles given a number of spaces in a channel.
S_FlocBaffleCalcH := SofN_FlocBaffleF(L_Sed, T_FlocBaffleRigidH, N_FlocSpacesFH(L_Sed, T_FlocBaffleRigidH, S_FlocBaffleNonIterative(Q_Plant, P_FlocChannelHIteration1, Pi_JSOptimal, ED_Floc))) = 0.556404 m
# Determine an estimate of the spacing, then calculate the number of spaces, then the actual spacing based on that number.
N_FlocSpacesPerChannelH := N_FlocSpacesFH(L_Sed, T_FlocBaffleRigidH, S_FlocBaffleCalcH) = 17  # Calculate the number of spaces separately for later use.
P_FlocChannelH :=
    P_MaxHorizontal(Q_Plant, S_FlocBaffleCalcH, Pi_JSOptimal, ED_Floc, J(Pi_JSOptimal, S_FlocBaffleCalcH)) if H_FlocOption == -1
    P_FlocChannelHIteration1 otherwise
    = 1.78505 m  # Reset the vertical length of water based on the actual spacing for horizontal flocculators.
EN_FlocHoriz :=
    EN_FlocHoriz ← 1 if Q_Plant ≥ Q_MinHorizontal(P_FlocChannelH, S_FlocBaffleMin, Pi_JSOptimal, ED_Floc, J_Min) and H_FlocOption > -1
    EN_FlocHoriz ← 1 if H_FlocOption == -1
    EN_FlocHoriz ← 0 otherwise
# Create a variable that will be used to distinguish between horizontal and vertical when deciding which algorithm to use in future steps. 1 is for horizontal, 0 is for vertical.
HW_Sed = 1.78505 m
EN_FlocHoriz = 1
## Flocculator Functions
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N_FlocSpacesFVMin(L, T, S) := Ceil((L + T)/(S + T), 2)  # Calculates number of spaces in one floc channel.Ceil to even number to ensure H/S not lower than 2.
N_FlocSpacesFVMax(L, T, S) := Floor((L + T)/(S + T), 2)  # Floor to ensure that there aren't too many spaces.
N_FlocSpacesFV(L, T, S) := Round((L + T)/(S + T), 2)  # Round when not at one of the extremes.
# The function below can also be used directly to solve for Ρ by substituting S for Ρ
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# recursive function | For vertical, you have to iterate to find the spacing.
S_FlocBaffleIterative(Q, Ρ, J, S, ED) := (K_FlocBaffle*α_ε(J/S)/(2*J*ED))^(1/3)*Q/Ρ
# Monroe put this in to make a later step more clear for vertical. It's just a rearrangement of the above equation.
P_FlocBaffle(Q, J, S, ED) := (K_FlocBaffle*α_ε(J/S)/(2*J*ED))^(1/3)*Q/S
S_FlocBaffleF(Q, Ρ, J, ED) :=
    if EN_FlocHoriz == 0
        S ← S_FlocBaffleIterative(Q, Ρ, J, J/4, ED)
        error ← 1
        while error > 0.001
            S_new ← S_FlocBaffleIterative(Q, Ρ, J, S, ED)
            error ← |S - S_new|/(S + S_new)
            S ← S_new
    return S
# This function returns a spacing that gives the target energy dissipation rate based on iteration.
# From Monroe's Flocculation notes. The non iterative spacing used for horizontal flocculation
S_FlocBaffleNonIterative(Q, P, Pi_JS, ED) := (Q/P)^(3/4)*(1/Pi_JS)^(1/4)*(K_FlocBaffle*α_ε(Pi_JS)/(2*ED))^(1/4)
# Just rearranging the above equation to calculate energy dissipation
EDH(Q, P, Pi_JS, S) := ((Q/P)^(3/4)*(1/Pi_JS)^(1/4)*(K_FlocBaffle*α_ε(Pi_JS)/2)^(1/4)/S)^4
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# Define energy dissipation for vertical. Equations are from Monroe's notes.
EDV(Q, J, S, Ρ) := α_ε(J/S)*K_FlocBaffle/(2*J)*(Q/(Ρ*S))^3
# The following function cycles through each flocculator channel and checks the possible range of the number of baffles in a channel to see which number of baffles results in the correct energy dissipation rate
# The following is Monroe's original code. Changes were made but seemed to make it not work so we reverted to original.
N_FlocSpacesPerChannelF(ED_ChannelRange, N_FlocSpacesMax, N_FlocSpacesMin) :=
    i ← 0
    while ED_ChannelRange[i] ≤ ED_Floc and i < (N_FlocSpacesMax - N_FlocSpacesMin)
        i ← i + 1
    i + N_FlocSpacesMin
## Calculation of Flocculator Geometry
# HORIZONTAL
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# For horizontal, use the optimal J/S ratio. This should automatically be true for H.FlocOption=-1 because of the Choosing Between Horizontal and Vertical Algorithm. Check to be sure.
J_FlocChannelH := S_FlocBaffleCalcH*Pi_JSOptimal = 1.66921 m
# Defines the collision potential per space in a horizontal flocculator.
ψ_SpaceH := ψ_P(J_FlocChannelH, S_FlocBaffleCalcH) = 1.32272 m^(2/3)
Q_Plant = 2377.55 gal/min
N_FlocChannelSpacesTotalH := ceil(CP_Floc/ψ_SpaceH) = 76  # Calculates the total number of spaces needed to achieve target energy dissipation
N_FlocChannelsH := ceil(N_FlocChannelSpacesTotalH/N_FlocSpacesPerChannelH) = 5
# Determines the number of channels needed based on the number of spaces per channel and the total number of spaces.
ChannelsH := 0 .. N_FlocChannelsH - 1  # range variable for the floc channels
S_FlocPortGapH := 0 m  # This is the gap needed between the last baffle and the port. For horizontal it is 0. Ask Monroe if an explanation is needed.
N_FlocChannelSpacesH :=
    for i ∈ 0 .. N_FlocChannelsH - 1
        Spaces[i] ← N_FlocSpacesPerChannelH
    Spaces[last(Spaces)] ← N_FlocSpacesPerChannelH - 2 if (S_FlocPortGapH + W_InletChannelEst) > (2*S_FlocBaffleCalcH)
    return Spaces
# Assigns the number of spaces in each channel to an array. It will subtract 2 from the last channel if there is an overlap between the baffle and the port connecting to the sed tank.
# There is one less baffle than space in each channel.
N_FlocChannelBafflesH := N_FlocChannelSpacesH - 1
N_FlocChannelBafflesH = [16; 16; 16; 16; 16]
N_FlocBafflesH := sum(N_FlocChannelBafflesH) = 80  # Total number of baffles in the flocculator
# Now we need to calculate the following for each channel
# baffle center to center distance
# baffle separation distance
# head loss in each channel
# Calculates the space between baffles.
S_FlocBaffleH := SofN_FlocBaffleF(L_Sed, T_FlocBaffleRigidH, N_FlocChannelSpacesH)
S_FlocBaffleH = [0.556404; 0.556404; 0.556404; 0.556404; 0.556404] m
J_FlocChannelH := Pi_JSOptimal*S_FlocBaffleH[0]  # Redefine J with actual baffle spacing
# VERTICAL
J_FlocChannelV :=
    H_FlocOption*m if H_FlocOption > 0
    HW_FlocEnd otherwise  # Define J (height of water at end of floc tank for vertical based on user option)
T_FlocBafflePlastic := T_SedPlate
# Since for vertical the same material that is used for the sed plates is used for the baffles, set their thicknesses equal to each other.
# The following steps determine whether plastic or rigid baffles are used for the vertical flocculator. Please refer to the flow chart to understand the logic more.
P_FlocChannelMin := P_FlocBaffle(Q_Plant, J_FlocChannelV, S_FlocBaffleMin, ED_Floc) = 1.90526 m  # Minimum channel width based on rigid baffles.
P_FlocChannelVPlastic := .5*W_Plastic = 0.53 m  # The plastic sheets can be cut, so we set them as being cut in half.
L_SedModified := L_Sed - 2*S_FlocBaffleSetBackPlastic  # Subtract off the end spaces since they will be different from the rest of the spaces
S_FlocBafflePerChannelVPlastic := SofN_FlocBaffleF(L_SedModified, T_FlocBafflePlastic, N_FlocSpacesFVMax(L_SedModified, T_FlocBafflePlastic, S_FlocBaffleF(Q_Plant, P_FlocChannelVPlastic, J_FlocChannelV, ED_Floc))) = 1.56427e-7 m
# Calculate the spacing for plastic baffles by approximating it then seeing how many spaces there can be with that approximation, then finding the actual spacing
N_FlocSpacesPerChannelVPlastic := N_FlocSpacesFVMax(L_SedModified, T_FlocBafflePlastic, S_FlocBafflePerChannelVPlastic) = 5510
# Define the number of spaces that was just calculated separately for later use
J_FlocChannelV/2 = 0.892524 m
# Calculate the optimal spacing for rigid baffles based on the optimal J/S ratio.
S_FlocBaffleOptimalVHumanMin := SofN_FlocBaffleF(L_Sed, T_FlocBaffleRigidV, N_FlocSpacesFV(L_Sed, T_FlocBaffleRigidV, J_FlocChannelV/Pi_JSOptimal)) = 0.567159 m
S_FlocBaffleMinVHumanMin := SofN_FlocBaffleF(L_Sed, T_FlocBaffleRigidV, N_FlocSpacesFVMax(L_Sed, T_FlocBaffleRigidV, S_FlocBaffleMin)) = 0.454948 m
# Calculate the minimum spacing for rigid so that a human could walk through the flocculator.
S_FlocBafflePerChannelVHumanMin := max(S_FlocBaffleMinVHumanMin, S_FlocBaffleOptimalVHumanMin) = 0.567159 m  # Choose the max of the minimum and optimal
P_FlocChannelVHumanMin := P_FlocBaffle(Q_Plant, J_FlocChannelV, S_FlocBafflePerChannelVHumanMin, ED_Floc) = 1.51169 m  # Caclulate the width of the channel.
N_FlocSpacesPerChannelVHumanMin := N_FlocSpacesFV(L_Sed, T_FlocBaffleRigidV, S_FlocBafflePerChannelVHumanMin) = 18  # Calculate the number of spaces per channel
P_FlocChannelV :=
    P_FlocChannelVHumanMin if P_FlocChannelMin > P_FlocChannelVPlastic
    P_FlocChannelVPlastic otherwise
    = 1.51169 m  # If the minimum channel width is greater than the plastic channel width, set the channel width as the one calculated using a human min
# If the minimum channel width is greater than the plastic channel width, set the spacing as the one calculated using a human min
S_FlocBafflePerChannelV :=
    S_FlocBafflePerChannelVHumanMin if P_FlocChannelMin > P_FlocChannelVPlastic
    S_FlocBafflePerChannelVPlastic otherwise
    = 0.567159 m
N_FlocSpacesPerChannelV :=
    N_FlocSpacesPerChannelVHumanMin if P_FlocChannelMin > P_FlocChannelVPlastic
    N_FlocSpacesPerChannelVPlastic otherwise
    = 18  # If the minimum channel width is greater than the plastic channel width, set the number of spaces as the one calculated using a human min
# Calculate the number of spaces in each channel
ψ_SpaceV := ψ_P(J_FlocChannelV, S_FlocBafflePerChannelV) = 1.38323 m^(2/3)  # Calculate the collision potential per space
N_FlocChannelSpacesTotalV := ceil(CP_Floc/ψ_SpaceV) = 73  # Calculate the total number of spaces needed to achieve the target energy dissipation
# This needs to happen here because X.FlocBaffles is returning a matrix having units of length. It will not allow us to return N.FlocChannelSpaces/Baffles because they are unitless...
N_FlocChannelsV := ceil(N_FlocChannelSpacesTotalV/N_FlocSpacesPerChannelV) = 5
# Calculate the number of channels needed based on the total number of spaces and the spaces per channel
ChannelsV := 0 .. N_FlocChannelsV - 1  # range variable for the floc channels
T_FlocBaffleV :=
    T_FlocBaffleRigidV if P_FlocChannelMin > P_FlocChannelVPlastic
    T_FlocBafflePlastic otherwise
    = 0.05 m  # If the minimum channel width is greater than the plastic channel width, set the baffle thickness as the rigid baffle thickness
S_FlocBaffleV :=
    for i ∈ 0 .. N_FlocChannelsV - 1
        Spacing[i] ← S_FlocBafflePerChannelV
    Spacing[last(Spacing)] ← SofN_FlocBaffleF(L_Sed, T_FlocBaffleV, N_FlocSpacesPerChannelV - 1)
    return Spacing
    = [0.567159; 0.567159; 0.567159; 0.567159; 0.603462] m
# Define an array that has the spacing in each channel. There will be one less baffle in the last channel to maintain the flow pattern into the sed tank, so respace that channel accordingly.
EN_FlocBaffle :=
    EN_FlocBaffle ← 0 if (P_FlocChannelMin > P_FlocChannelVPlastic) or EN_FlocHoriz == 1
    EN_FlocBaffle ← 1 otherwise
    = 0  # Define an enumerated type for the baffle type.Rigid is 0, Plastic is 1
EN_FlocHoriz = 1
S_FlocPortGapV :=
    T_ConcreteMin if EN_FlocBaffle == 0
    S_FlocBaffleSetBackPlastic otherwise
    = 0.05 m
# If the baffles are rigid, leave enough space between the last ones and the ports to provide structural support. If they are plastic, leave a little extra space as a safety factor.
N_FlocChannelSpacesV :=
    for i ∈ 0 .. N_FlocChannelsV - 1
        Spaces[i] ← N_FlocSpacesPerChannelV
    Spaces[last(Spaces)] ← N_FlocSpacesPerChannelV - 1
    return Spaces
    = [18; 18; 18; 18; 17]  # Define an array for the number of spaces in each channel
N_FlocChannelSpacesV[last(N_FlocChannelSpacesV)] :=
    N_FlocChannelSpacesV[last(N_FlocChannelSpacesV)] - 2 if (S_FlocPortGapV + W_InletChannelEst) > (2*S_FlocBaffleV[last(S_FlocBaffleV)])
    N_FlocChannelSpacesV[last(N_FlocChannelSpacesV)] otherwise
# If the baffles in the last channel overlap with the port into the sed tank, subtract two baffles. Spacing gets reassigned later in the code if the first case is true.
N_FlocChannelBafflesV := N_FlocChannelSpacesV - 1 = [17; 17; 17; 17; 16]  # There is one less baffle than spaces.
N_FlocBafflesV := sum(N_FlocChannelBafflesV) = 84  # Total number of baffles in the flocculator
## Assign Correct Variables for either Horizontal or Vertical
# All of the following just assign the general variables as either horizontal or vertical depending on what the previous code determined. Some are for baffle type (rigid or plastic) depending on which one is chosen.
S_FlocBaffle :=
    S_FlocBaffle ← S_FlocBaffleH if EN_FlocHoriz == 1
    S_FlocBaffle ← S_FlocBaffleV otherwise
    = [0.556404; 0.556404; 0.556404; 0.556404; 0.556404] m
J_FlocChannel :=
    J_FlocChannel ← J_FlocChannelH if EN_FlocHoriz == 1
    J_FlocChannel ← J_FlocChannelV otherwise
    = 1.66921 m
P_FlocChannel :=
    P_FlocChannel ← P_FlocChannelH if EN_FlocHoriz == 1
    P_FlocChannel ← P_FlocChannelV otherwise
    = 1.78505 m
J_FlocChannel = 1.66921 m
N_FlocBaffles :=
    N_FlocBaffles ← N_FlocBafflesH if EN_FlocHoriz == 1
    N_FlocBaffles ← N_FlocBafflesV otherwise
    = 80
N_FlocChannelBaffles :=
    N_FlocChannelBaffles ← N_FlocChannelBafflesH if EN_FlocHoriz == 1
    N_FlocChannelBaffles ← N_FlocChannelBafflesV otherwise
    = [16; 16; 16; 16; 16]
N_FlocChannels :=
    N_FlocChannels ← N_FlocChannelsH if EN_FlocHoriz == 1
    N_FlocChannels ← N_FlocChannelsV otherwise
    = 5
N_FlocChannelSpaces :=
    N_FlocChannelSpaces ← N_FlocChannelSpacesH if EN_FlocHoriz == 1
    N_FlocChannelSpaces ← N_FlocChannelSpacesV otherwise
    = [17; 17; 17; 17; 17]
Channels :=
    Channels ← ChannelsH if EN_FlocHoriz == 1
    Channels ← ChannelsV otherwise
HW_FlocEnd :=
    HW_FlocEnd ← P_FlocChannel if EN_FlocHoriz == 1
    HW_FlocEnd ← J_FlocChannel otherwise
    = 1.78505 m
# Need for drain calculations
W_FlocChannel :=
    W_FlocChannel ← J_FlocChannel if EN_FlocHoriz == 1
    W_FlocChannel ← P_FlocChannel otherwise
    = 1.66921 m
# Needed for AutoCad code
HW_FlocChannel :=
    HW_FlocChannel ← P_FlocChannel if EN_FlocHoriz == 1
    HW_FlocChannel ← J_FlocChannel otherwise
T_FlocBaffle :=
    T_FlocBaffle ← T_FlocBaffleRigidH if EN_FlocHoriz == 1
    T_FlocBaffle ← T_FlocBaffleV otherwise
CP_Space :=
    CP_Space ← ψ_SpaceH if EN_FlocHoriz == 1
    CP_Space ← ψ_SpaceV otherwise
    = 1.32272 m^(2/3)
S_FlocPortGap :=
    S_FlocPortGap ← S_FlocPortGapH if EN_FlocHoriz == 1
    S_FlocPortGap ← S_FlocPortGapV otherwise
    = 0 m
S_FlocBaffleSetBack :=
    S_FlocBaffleSetBack ← S_FlocBaffleSetBackPlastic if EN_FlocBaffle == 1
    S_FlocBaffleSetBack ← 0 m otherwise
    = 0 m
# Width of the port connecting channels for horizontal is just the same as the space between baffles.
W_FlocPortH := S_FlocBaffle = [0.556404; 0.556404; 0.556404; 0.556404; 0.556404] m
W_FlocPortV :=
    W_FlocPortV ← S_FlocBaffle - S_FlocPortGapV if EN_FlocBaffle == 0
    W_FlocPortV ← S_FlocBaffle otherwise
    = [0.506404; 0.506404; 0.506404; 0.506404; 0.506404] m  # Subtract the gap needed between the baffle and the port to find the width of the port
S_FlocBaffle = [0.556404; 0.556404; 0.556404; 0.556404; 0.556404] m
W_FlocPort :=
    W_FlocPort ← W_FlocPortH if EN_FlocHoriz == 1
    W_FlocPort ← W_FlocPortV otherwise
W_FlocPort0 := W_FlocPort[0] = 0.556404 m
S_FlocBaffle[last(S_FlocBaffle)] :=
    (L_Sed - W_InletChannelEst - 2*S_FlocPortGap - W_FlocPort[last(W_FlocPort) - 1] - T_FlocBaffle)/(N_FlocChannelSpaces[last(N_FlocChannelSpaces)] - 2) - T_FlocBaffle if (S_FlocPortGap + W_InletChannelEst) > S_FlocBaffle[last(S_FlocBaffle)]
    SofN_FlocBaffleF(L_Sed, T_FlocBaffle, N_FlocChannelSpaces[last(N_FlocChannelSpaces)]) otherwise
# This respaces the last channel if there is an overlap with the port connecting to the sed tank. It's confusing but just draw it out if you need to understand it.
S_FlocBaffle = [0.556404; 0.556404; 0.556404; 0.556404; 0.543138] m
S_FlocBaffleFirst := S_FlocBaffle[0]
S_FlocBaffleLast := S_FlocBaffle[last(S_FlocBaffle)]
N_FlocChannelBafflesFirst := N_FlocChannelBaffles[0] = 16
N_FlocChannelBafflesLast := N_FlocChannelBaffles[last(N_FlocChannelBaffles)] = 16
# Verify that the channels are all the correct length
vectorize(N_FlocChannelSpaces*S_FlocBaffle) + (N_FlocChannelSpaces - 1)*T_FlocBaffle = [11.0589; 11.0589; 11.0589; 11.0589; 10.8333] m
# Last one won't look right if had to be respaced because of overlap with inlet channel.
ED_FlocChannel[Channels] :=
    ED_FlocChannel[Channels] ← EDH(Q_Plant, P_FlocChannel, Pi_JSOptimal, S_FlocBaffle[Channels]) if EN_FlocHoriz == 1
    ED_FlocChannel[Channels] ← EDV(Q_Plant, J_FlocChannel, S_FlocBaffle[Channels], P_FlocChannel) otherwise
ED_FlocChannel = [4.12737; 4.12737; 4.12737; 4.12737; 4.54561] mW/kg  # This is the actual energy dissipation rate in each channel
ED_FlocChannelFirst := ED_FlocChannel[0] = 4.12737 mW/kg
ED_FlocChannelLast := ED_FlocChannel[last(ED_FlocChannel)] = 4.54561 mW/kg
# Calculate the collision potential for each channel
CP_FlocChannel[Channels] := ψ_P(J_FlocChannel, S_FlocBaffle[Channels])*N_FlocChannelSpaces[Channels]
CP_FlocChannel = [22.4863; 22.4863; 22.4863; 22.4863; 22.4863] m^(2/3)
CP_FlocTotal := sum(CP_FlocChannel) = 112.431 m^(2/3)
HL_FlocBaffle := K_FlocBaffle*Q_Plant^2/(2*g*(S_FlocBaffle*P_FlocChannel)^2) = [0.00232585; 0.00232585; 0.00232585; 0.00232585; 0.00244085] m
# head loss per baffle in each channel
HL_FlocChannels := vectorize(HL_FlocBaffle*(N_FlocChannelBaffles + 1)) = [0.0395395; 0.0395395; 0.0395395; 0.0395395; 0.0414945] m  # total head loss per channel
HL_Floc := HL_FlocBaffle*N_FlocChannelSpaces = 0.199652 m  # total head loss in the flocculator
H_Sed = 1.88505 m
# Height of the water at the beginning of the flocculator
HW_FlocStart :=
    (P_FlocChannel + HL_Floc) if EN_FlocHoriz == 1
    (J_FlocChannel + HL_Floc) otherwise
HW_Sed = 1.78505 m
# Here we are assuming that the entire flocculator has extra tall walls. But that isn't necessary. The walls could be different heights for each channel. Probably not easier to construct though
H_Floc := HW_FlocStart + H_PlantFreeboard = 2.0847 m
J_FlocChannel = 1.66921 m
L_FlocTank := N_FlocChannels*L_Sed = 55.2943 m  # Total length of floc tanks
Ti_Floc := J_FlocChannel*L_FlocTank*P_FlocChannel/Q_Plant
# Residence time in flocculator. This is an estimate. It doesn't include ports, head loss, or space taken up by baffles.
H_FlocPortH :=
    if EN_FlocHoriz == 1
        for i ∈ 0 .. N_FlocChannels - 1
            H_FlocPort[i] ← H_Floc
    return H_FlocPort
    = [2.0847; 2.0847; 2.0847; 2.0847; 2.0847] m
# Height of the floc port connecting channels. For horizontal, it's just the same height as the flocculator to maintain the flow pattern.
A_FlocPortH := W_FlocPortH*H_FlocPortH = 5.79967 m^2  # The area of the port is just the height times the width (width was defined above. Hit Ctrl+F to find it)
W_FlocPortEstV := S_FlocBaffle = [55.6404; 55.6404; 55.6404; 55.6404; 54.3138] cm
H_FlocPortEstV := P_FlocChannel = 1.78505 m
# Maintain the area of the port as the area that the water flows through in the baffles. This keeps the energy dissipation rate through the ports the same as through the baffles since the dimension of the port is actually exactly the same as the dimension through the baffles
A_FlocPortV := W_FlocPortEstV*H_FlocPortEstV = [0.993207; 0.993207; 0.993207; 0.993207; 0.969527] m^2
H_FlocPortV := A_FlocPortV/W_FlocPortV = [1.9613; 1.9613; 1.9613; 1.9613; 1.91453] m
# This could become really tall and structrually unsound if the baffle spacing is too small. Check the drawing that outputs to make sure it is not.
H_FlocPort :=
    H_FlocPort ← H_FlocPortH if EN_FlocHoriz == 1
    H_FlocPort ← H_FlocPortV otherwise
    = [2.0847; 2.0847; 2.0847; 2.0847; 2.0847] m
H_FlocPort0 := H_FlocPort[0] = 2.0847 m
A_FlocPort :=
    A_FlocPort ← A_FlocPortH if EN_FlocHoriz == 1
    A_FlocPort ← A_FlocPortV otherwise
    = 5.79967 m^2
a
## Position calculations for each baffle
# Now we need to assign positions, lengths and elevations to floc baffles
L_FlocBaffleLowerH := J_FlocChannel - S_FlocBaffle[0] = 1.11281 m
# For horizontal the baffles are side to side instead of upper and lower, but we just kept those names for consistency. The lengths are the same on both sides. Since we kept J.FlocChannel the same for last channel too (as opposed to modifiying it in the case of slightly different spacing) we can just subtract the baffle spacing in the first channel (this is the length that the water flows around beyond the baffle). Look at a plant drawing if this doensn't make sense.
L_FlocBaffleUpperH := J_FlocChannel - S_FlocBaffle[0] = 1.11281 m
L_FlocBaffleLowerV := HW_FlocEnd - S_FlocBaffle[0]*Pi_FlocBaffle = 1.22864 m
# For vertical, the upper and lower baffles are different lengths. The lower one is the height of the water at the end of the flocculator minus the space for the water to flow.
L_FlocBaffleUpperV := (H_Floc - .5*H_PlantFreeboard) - S_FlocBaffle[0]*Pi_FlocBaffle = 1.4783 m
# For the upper baffles, start at the top of the flocculator, subtract half of the freeboard height to allow room for overflow, then subtract the space for the water to flow.
L_FlocBaffleLower :=
    L_FlocBaffleLower ← L_FlocBaffleLowerH if EN_FlocHoriz == 1
    L_FlocBaffleLower ← L_FlocBaffleLowerV otherwise
L_FlocBaffleUpper :=
    L_FlocBaffleUpper ← L_FlocBaffleUpperH if EN_FlocHoriz == 1
    L_FlocBaffleUpper ← L_FlocBaffleUpperV otherwise  # Assign generic variables based on horizontal or vertical
N_FlocBaffleLowerV :=
    for i ∈ 0 .. N_FlocChannelsV - 1
        N_FlocBaffleLowerV[i] ← floor((N_FlocChannelBaffles[i] + 1)/2)
    return N_FlocBaffleLowerV
    = [8; 8; 8; 8; 8]
# Calculate the number of lower baffles per channel as an array
N_FlocBaffleLowerTotalV := sum(N_FlocBaffleLowerV) = 40  # Calculate the total number of lower baffles
N_FlocBaffleUpperV :=
    for i ∈ 0 .. N_FlocChannelsV - 1
        N_FlocBaffleUpperV[i] ← (N_FlocChannelBaffles[i] - N_FlocBaffleLowerV)[i]
    return N_FlocBaffleUpperV
    = [8; 8; 8; 8; 8]
# Subtract the total number of  lower baffles in a channel from the total number of baffles in that channel to find the number of upper baffles as an array for each channel.
N_FlocBaffleUpperTotalV := sum(N_FlocBaffleUpperV) = 40  # Calculate the total number of upper baffles
N_FlocBaffleLowerTotalV + N_FlocBaffleUpperTotalV + N_FlocChannelsV = 85
sum(N_FlocChannelSpaces) = 85
L_Slot :=
    L_Slot ← T_ConcreteMin if EN_FlocBaffle == 0 and EN_FlocHoriz == 0
    L_Slot ← 0 m otherwise  # If the flocculator is vertical with rigid baffles, slots in the channel walls are needed to hold them in place.
W_FlocBaffle :=
    W_FlocChannel + 2*L_Slot if EN_FlocHoriz == 0
    H_Floc otherwise
# If there is a slot, the width of the baffle needs to be wider than the channel to fit into the slot. Since there are slots at each end, it is wider by twice the length of the slot.
B_FlocBaffle := S_FlocBaffle + T_FlocBaffle  # B is the center to center distance between baffles whereas S was the distance without any thicknesses included.
S_FlocBaffle = [0.556404; 0.556404; 0.556404; 0.556404; 0.543138] m
B_FlocBaffleFirst := B_FlocBaffle[0] = 0.656404 m
# The first and last spacing are defined so that they can be returned to the builder.
B_FlocBaffleLast := B_FlocBaffle[last(B_FlocBaffle)] = 0.643138 m
# X.FlocBaffles creates an array for all of the "x" positions of the baffles. The x direction goes in the direction of the longer length of the flocculator channels.
X_FlocBaffles :=
    for channel ∈ 0 .. N_FlocChannels - 1
        for i ∈ 0 .. N_FlocChannelBaffles[channel] - 1
            x[i, channel] ← S_FlocBaffle[channel] + S_FlocBaffleSetBack + B_FlocBaffle[channel]*i
    if (S_FlocPortGap + W_InletChannelEst) > S_FlocBaffle[last(S_FlocBaffle)]
        for i ∈ 0 .. N_FlocChannelBaffles[last(N_FlocChannelBaffles)] - 1
            x[i, N_FlocChannels - 1] ← B_FlocBaffle[last(B_FlocBaffle)]*i + S_FlocPortGap + W_InletChannelEst
        return x
    return x
# if the spacing between baffles is less than the sum of the inlet channel and the "lip" between ports and the nearest baffle, at least one baffle will be in the midst of the inlet channel (or too close to it). In this case, respace the baffles using the remaining length (Length of the sed tank - width of the inlet channel - "lip"). The remaining space should be divided by the number of calculated spaces -1 because one baffle would be aligned with the edge of the remaining space (not dividing it up into 2 spaces). if the spacing is not such that at least one baffle will be in the midst of the inlet channel, space normally.
S_FlocBaffle[last(S_FlocBaffle)] + B_FlocBaffle[last(S_FlocBaffle)]*0 = 0.543138 m
X_FlocBaffles = [
    0.556404, 0.556404, 0.556404, 0.556404, 0.75539;
    1.21281, 1.21281, 1.21281, 1.21281, 1.39853;
    1.86921, 1.86921, 1.86921, 1.86921, 2.04167;
    2.52561, 2.52561, 2.52561, 2.52561, 2.6848;
    3.18202, 3.18202, 3.18202, 3.18202, 3.32794;
    3.83842, 3.83842, 3.83842, 3.83842, 3.97108;
    4.49483, 4.49483, 4.49483, 4.49483, 4.61422;
    5.15123, 5.15123, 5.15123, 5.15123, 5.25735;
    5.80763, 5.80763, 5.80763, 5.80763, 5.90049;
    6.46404, 6.46404, 6.46404, 6.46404, 6.54363;
    7.12044, 7.12044, 7.12044, 7.12044, 7.18677;
    7.77684, 7.77684, 7.77684, 7.77684, 7.82991;
    8.43325, 8.43325, 8.43325, 8.43325, 8.47304;
    9.08965, 9.08965, 9.08965, 9.08965, 9.11618;
    9.74605, 9.74605, 9.74605, 9.74605, 9.75932;
    10.4025, 10.4025, 10.4025, 10.4025, 10.4025
] m
N_FlocChannelSpaces = [17; 17; 17; 17; 17]
S_FlocBaffle = [0.556404; 0.556404; 0.556404; 0.556404; 0.543138] m
# Does not work for lower flow rates because there are no baffles in the floc tank, so the array cannot calculate coordinates
L_Sed = 11.0589 m
# X array is the distance from the inside of the wall of the floc tank (on the side of the plant that has the inlet channel to the sed tank) to the face of the baffle closest to that end of the floc tank
# Y.FlocBaffles goes in the direction along the shorter walls of the flocculator
# For horizontal, the Y position of the baffles is staggered for every other baffle. Draw it out to understand how the code works.
Y_FlocBafflesH :=
    if EN_FlocHoriz == 1
        if mod(N_FlocChannels, 2) == 0
            for i ∈ 0 .. (N_FlocChannels - 1)
                for j ∈ 0 .. N_FlocChannelBaffles[i] - 1
                    Y_FlocBaffles[j, i] ← (Plant_Origin[1] + (N_SedTanks*(W_Sed + T_PlantWall)) + ((N_FlocChannels - i - 1)*(J_FlocChannel + T_PlantWall))) + mod(j, 2)*S_FlocBaffle[0] if mod(i, 2) == 1
                    Y_FlocBaffles[j, i] ← (Plant_Origin[1] + (N_SedTanks*(W_Sed + T_PlantWall)) + ((N_FlocChannels - i - 1)*(J_FlocChannel + T_PlantWall))) + mod(j + 1, 2)*S_FlocBaffle[0] otherwise
            Y_FlocBaffles[j, i]
        otherwise
            for i ∈ 0 .. (N_FlocChannels - 1)
                for j ∈ 0 .. N_FlocChannelBaffles[i] - 1
                    Y_FlocBaffles[j, i] ← (Plant_Origin[1] + (N_SedTanks*(W_Sed + T_PlantWall)) + ((N_FlocChannels - i - 1)*(J_FlocChannel + T_PlantWall))) + mod(j, 2)*S_FlocBaffle[0] if mod(i + 1, 2) == 1
                    Y_FlocBaffles[j, i] ← (Plant_Origin[1] + (N_SedTanks*(W_Sed + T_PlantWall)) + ((N_FlocChannels - i - 1)*(J_FlocChannel + T_PlantWall))) + mod(j + 1, 2)*S_FlocBaffle[0] otherwise
            Y_FlocBaffles[j, i]
    return Y_FlocBaffles
# S.FlocBaffle0 should be used because if the last channel is respaced it screws up how it is drawn so that there is a little gap between the bafflle and the edge of the channel.
# Even number of floc channels causes the entrance tank to switch sides
# Odd number of floc channels
Y_FlocBafflesV :=
    if EN_FlocHoriz == 0
        for j ∈ 0 .. (N_FlocChannels - 1)
            Y_FlocBaffles[0, j] ← Plant_Origin[1] + (N_SedTanks*(W_Sed + T_PlantWall)) + ((N_FlocChannels - j - 1)*(P_FlocChannel + T_PlantWall))
    return Y_FlocBaffles  # The y position of the baffles is the same within each channel for vertical. Again, draw it out to understand the code.
Y_FlocBaffles :=
    Y_FlocBaffles ← Y_FlocBafflesH if EN_FlocHoriz == 1
    Y_FlocBaffles ← Y_FlocBafflesV otherwise
S_FlocBaffle = [0.556404; 0.556404; 0.556404; 0.556404; 0.543138] m
Z_FlocBafflesH :=
    if EN_FlocHoriz == 1
        for channel ∈ Channels
            for i ∈ 0 .. N_FlocChannelBaffles[channel] - 1
                z[i, channel] ← 0 m
    return z  # Z array is the elevation of the bottom of the baffle. For horizontal, all baffles are at the same elevation.
Y_FlocBaffles = [
    24.8368, 23.574, 21.1984, 19.9356, 17.56;
    25.3932, 23.0176, 21.7548, 19.3792, 18.1164;
    24.8368, 23.574, 21.1984, 19.9356, 17.56;
    25.3932, 23.0176, 21.7548, 19.3792, 18.1164;
    24.8368, 23.574, 21.1984, 19.9356, 17.56;
    25.3932, 23.0176, 21.7548, 19.3792, 18.1164;
    24.8368, 23.574, 21.1984, 19.9356, 17.56;
    25.3932, 23.0176, 21.7548, 19.3792, 18.1164;
    24.8368, 23.574, 21.1984, 19.9356, 17.56;
    25.3932, 23.0176, 21.7548, 19.3792, 18.1164;
    24.8368, 23.574, 21.1984, 19.9356, 17.56;
    25.3932, 23.0176, 21.7548, 19.3792, 18.1164;
    24.8368, 23.574, 21.1984, 19.9356, 17.56;
    25.3932, 23.0176, 21.7548, 19.3792, 18.1164;
    24.8368, 23.574, 21.1984, 19.9356, 17.56;
    25.3932, 23.0176, 21.7548, 19.3792, 18.1164
] m
Channelsnew := 0 .. N_FlocChannels - 2
Z_FlocBafflesV :=
    if EN_FlocHoriz == 0
        for channel ∈ Channelsnew
            for i ∈ 0 .. N_FlocChannelBaffles[channel] - 1
                z[i, channel] ← mod(i, 2)*S_FlocBaffle[channel]
        for i ∈ 0 .. N_FlocChannelBaffles[last(N_FlocChannelBaffles)] - 1
            z[i, N_FlocChannels - 1] ← mod(i + 1, 2)*S_FlocBaffle[N_FlocChannels - 1]
    return z
# For vertical, every other baffle is raised. The last channel is slightly different to maintain the flow pattern.
Z_FlocBaffles :=
    Z_FlocBaffles ← Z_FlocBafflesH if EN_FlocHoriz == 1
    Z_FlocBaffles ← Z_FlocBafflesV otherwise
Z_FlocBaffles = [
    0, 0, 0, 0, 0;
    0, 0, 0, 0, 0;
    0, 0, 0, 0, 0;
    0, 0, 0, 0, 0;
    0, 0, 0, 0, 0;
    0, 0, 0, 0, 0;
    0, 0, 0, 0, 0;
    0, 0, 0, 0, 0;
    0, 0, 0, 0, 0;
    0, 0, 0, 0, 0;
    0, 0, 0, 0, 0;
    0, 0, 0, 0, 0;
    0, 0, 0, 0, 0;
    0, 0, 0, 0, 0;
    0, 0, 0, 0, 0;
    0, 0, 0, 0, 0
] m
L_FlocBafflesH :=
    if EN_FlocHoriz == 1
        for channel ∈ Channels
            for i ∈ 0 .. N_FlocChannelBaffles[channel] - 1
                l[i, channel] ← L_FlocBaffleLower
    return l  # L array is the length of the baffles
# The lengths of all the baffles are the same for horizontal
L_FlocBafflesV :=
    if EN_FlocHoriz == 0
        for channel ∈ Channelsnew
            for i ∈ 0 .. N_FlocChannelBaffles[channel] - 1
                l[i, channel] ← L_FlocBaffleUpper if mod(i, 2) == 1
                l[i, channel] ← L_FlocBaffleLower otherwise
        for i ∈ 0 .. N_FlocChannelBaffles[last(N_FlocChannelBaffles)] - 1
            l[i, N_FlocChannels - 1] ← L_FlocBaffleLower if mod(i, 2) == 1
            l[i, N_FlocChannels - 1] ← L_FlocBaffleUpper otherwise
    return l  # For vertical, the lengths of the upper baffles are different from the lower baffles.
# For the last channel, the length of the
# baffles needed to be changed since the
# up/down had been adjusted.
L_FlocBaffles :=
    L_FlocBaffles ← L_FlocBafflesH if EN_FlocHoriz == 1
    L_FlocBaffles ← L_FlocBafflesV otherwise
L_FlocBaffles = [
    1.11281, 1.11281, 1.11281, 1.11281, 1.11281;
    1.11281, 1.11281, 1.11281, 1.11281, 1.11281;
    1.11281, 1.11281, 1.11281, 1.11281, 1.11281;
    1.11281, 1.11281, 1.11281, 1.11281, 1.11281;
    1.11281, 1.11281, 1.11281, 1.11281, 1.11281;
    1.11281, 1.11281, 1.11281, 1.11281, 1.11281;
    1.11281, 1.11281, 1.11281, 1.11281, 1.11281;
    1.11281, 1.11281, 1.11281, 1.11281, 1.11281;
    1.11281, 1.11281, 1.11281, 1.11281, 1.11281;
    1.11281, 1.11281, 1.11281, 1.11281, 1.11281;
    1.11281, 1.11281, 1.11281, 1.11281, 1.11281;
    1.11281, 1.11281, 1.11281, 1.11281, 1.11281;
    1.11281, 1.11281, 1.11281, 1.11281, 1.11281;
    1.11281, 1.11281, 1.11281, 1.11281, 1.11281;
    1.11281, 1.11281, 1.11281, 1.11281, 1.11281;
    1.11281, 1.11281, 1.11281, 1.11281, 1.11281
] m
L_FlocWithWalls := L_Sed + 2*T_PlantWall = 11.3589 m
# Calculate the length and width of the flocculator including the walls for easy construction (values are returned to user).
W_FlocWithWalls := W_FlocChannel*N_FlocChannels + T_PlantWall*N_FlocChannels
# W.FlocWithWalls Doesnt include wall shared with sed tank because that is accounted for in sed tank.
# Z.FlocTank is the elevation of the flocculator with respect to the bottom of the sed tank.
Z_FlocTank := HW_Sed - HW_FlocChannel = 0 m
# V.Floc is the velocity in the flocculator
V_Floc := Q_Plant/(S_FlocBaffle[0]*P_FlocChannel) = 0.151026 m/s
Alpha_Epsilon := α_ε(J_FlocChannel/S_FlocBaffle[0]) = 2  # See Monroe's notes for explanations of these parameters.
Alpha_Phi := α_ψ(J_FlocChannel/S_FlocBaffle[0]) = 0.94
## Drain Calculations (Vertical)
# This is a program to calculate how much time is required to drain out a flocculator section. Each section of the flocculator is connected to one another with alternating holes on the bottom of the baffles. These holes are small enough not to disrupt flow over the baffles and big enough such that one drain will empty out all the sections.
# Initially, the tank is full. This is denoted at time=t(0).
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# Once the tanks start draining, at time=t(1) all the water is level.
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# At time=t(2), section 1 has begun to drain quicker than sections 2, 3 & 4.
# Each hole on the bottom of the baffles is treated as an orifice.
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# available valve diameters
ND_Valvem := [0.0508; 0.0762; 0.1016; 0.127; 0.1524; 0.1778; 0.2032]*m
Q_minor(K_minor, D, h1, h2) :=
    Q ← (π*D^2/4*sqrt(2*g*(h1 - h2)/K_minor)) if h1 - h2 > 0
    Q ← 0*m^3/s otherwise
# Base and width are defined as the base and width of a single channel
# We need to calculate 'n' different h values plus an extra 'h'
# which would be the value emptied from tank 1. The tanks are
# numbered from 1 to n
# There will only be n-1 different flows out from each tank
# . | .
t_masterV(base, width, D_Valve, K_Valve, h_initial, H_LowerBaffle, n_tanks) :=
    time ← (sqrt(h_initial) - sqrt(H_LowerBaffle))/((π*D_Valve^2/(8*n_tanks*base*width))*sqrt(2*g/K_Valve))
    Δt ← base*width*H_LowerBaffle/(Q_minor(K_Valve, D_Valve, H_LowerBaffle, 0 m)*100)
    for i ∈ 0 .. n_tanks
        h_tank[i] ← H_LowerBaffle
    h_tank[0] ← 0 m
    while h_tank[n_tanks, 0] > 1 mm
        time ← time + Δt
        for i ∈ 0 .. n_tanks
            Q[i] ← Q_minor(K_Valve, D_Valve, h_tank[i + 1], h_tank[i]) if i < n_tanks
            Q[i] ← 0*m^3/s otherwise
            h_tank[i] ← h_tank[i] + (Q[i] - Q[i - 1])*Δt/(base*width) if i > 0
            h_tank[i] ← 0 m otherwise
    return time  # initial guess for time based on the total number of tanks in each channel
# delta t is based on the height of the lower baffle in the first channel
# Solution path to get port area and valve diameter
# Find area of ports assuming all including valve are same area.
# Try solution with valve one size smaller
# find required port area
# If that doesn't work, then increase valve size
# find required port area
# These equations are from integration of the flow out of a tank with changing depth
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# If the valve is the flow limiter, the relationship is linear
# Below code has been updated 3/18/2010
# think about making this more generic?
# also exists in another form in pipe database
# The following function returns a port size based on allowable valve sizes
ND_FlocValveF(desiredT) :=
    tankDrainTime ← 100 hr
    i ← 0
    ND_Valve ← 0 m
    N_tanks ←
        N_FlocChannelBaffles[0] if N_FlocChannels > 2
        floor(N_FlocChannelBaffles[0]/2) otherwise
    ND_ValveStart ← NominalDiameter(sqrt(sqrt((HW_FlocEnd + HW_FlocStart)/2)/((π*desiredT/(8*L_Sed*2*(T_PlantWall + W_FlocChannel)))*sqrt(2*g/(K_GateValve + K_Exp)))), EN_PipeSpec)
    if EN_FlocHoriz == 0
        ND_Valve ← ND_Valvem[last(ND_Valvem)] if desiredT ≤ t_masterV(2*S_FlocBaffle[0], W_FlocChannel, innerdiameter(ND_Valvem[last(ND_Valvem)], EN_PipeSpec), K_GateValve + K_Exp, (HW_FlocEnd + HW_FlocStart)/2, L_FlocBaffleLower, N_tanks)
        i ← index(ND_ValveStart, ND_Valvem)
        while i < rows(ND_Valvem) and ND_Valve == 0 m
            tankDrainTime ← t_masterV(2*S_FlocBaffle[0], W_FlocChannel, innerdiameter(ND_Valvem[last(ND_Valvem)], EN_PipeSpec), K_GateValve + K_Exp, (HW_FlocEnd + HW_FlocStart)/2, L_FlocBaffleLower, N_tanks)
            ND_Valve ← ND_Valvem[i] if tankDrainTime < desiredT
            i ← i + 1 otherwise
            ND_Valve
    ND_Valve ← ND_ValveStart otherwise
    ND_Valve
# For vertical, the tank being drained is modeled as a series of tanks corresponding to the number of spaces between lower baffles in two channels (since valves are every other channel)
# Accounts for the case where there is only two channels and there will be a valve in both; divides the number of tanks by 2 in that case
# In the event the desired drain time cannot eb acheived by the alrgest valve size, the valve size is assigned to be the largest size
# For horizontal, calculates the ideal diameter then finds the next highest allowable diameter.  Assigns the largest valve size if the guess is larger than that.
ND_FlocValve := ND_FlocValveF(Ti_FlocDrain) = 6 in
D_FlocValve := 2*outerradius(ND_FlocValve) = 0.168275 m
H_FlocSlope := D_FlocValve/2
# Uses the nominal diameter of the valve to find the actual diameter (outer diameter of the  threaded side of the coupling/inner diameter of valve).  This is used to draw the drains more accurately.D FlocValve ends up being the ID of the valve and the OD of the coupling.
L_BafflePort := sqrt(π/4*D_FlocValve^2)
D_FlocScale := D_FlocValve/(1.16 m) = 0.145065  # Scaling factor needed for insertion.  This is based on how the block is saved
# Assupmtions:
# The Flocculator can be assumed as one straight channel rather than wrapping back and forth
# The port size is calculated for the time to drain 2 channels, since there is a valve on at least every other channel
# The volume of each "tank" (space between baffles) is equal
# The size of a port is equal to the size of the valve
# The minor loss through the port is the same as the minor loss through the valve (K.Exp + K.GateValve)
# Drain Valve Position Calcs for Vertical Flocculator
Y_FlocDrainValves :=
    for i ∈ 0 .. ceil(N_FlocChannels/2) - 1
        y[i] ← Plant_Origin[1] + N_SedTanks*(W_Sed + T_PlantWall) + 0.5*W_FlocChannel + 2*(W_FlocChannel + T_PlantWall)*i
    y[N_FlocChannels/2] ← Plant_Origin[1] + N_SedTanks*(W_Sed + T_PlantWall) + 0.5*W_FlocChannel + (W_FlocChannel + T_PlantWall)*(N_FlocChannels - 1) if mod(N_FlocChannels, 2) == 0 and EN_FlocHoriz == 0
    y  # Makes Drain vales a vector even if there is only 1 valve to make drawing easier
# Makes Drain vales a vector even if there is only 1 valve to make drawing easier
# Starts calculating from the side closer tot he sed tank and moves towards the entrance tank.  Places the valve in the center of each channel so that the center of each valve is at-grade.
# Starts calculating from the side closer tot he sed tank and moves towards the entrance tank.  Places the valve in the center of each channel so that the center of each valve is at-grade.
Y_FlocDrainValves = [18.3946; 22.033; 25.6714] m
N_FlocValves := length(Y_FlocDrainValves) = 3
Q_Plant = 0.15 m^3/s
# Floc Tank Baffle Modules
# The floc baffle modules code needs more work. Please refer to Monroe for future work on this project.
L_Target := 70 cm  # This is the target length for one module
N_FlocChannelBaffles := round(L_Sed/L_Target) = 16
N_FlocModules := N_FlocChannels*N_FlocChannelBaffles = 80
# This allows for one baffle per module. Might want to change this. This could potentially even result in
# zero baffles per module in the last channel. Maybe we want to define a minimum number of baffles
# per module and then adjust the length accordingly?
N_BafflesPerModule :=
    for i ∈ 0 .. last(N_FlocChannelBaffles)
        a_guess[i] ← round(N_FlocChannelBaffles[i]/N_FlocChannelModules)
        a[i] ← a_guess[i] if N_FlocChannelBaffles[i] - N_FlocChannelModules*a_guess[i] ≥ 0
        a[i] ← a_guess[i] - 1 otherwise
    return a
    = [1; 1; 1; 1; 1]
N_FlocChannelBaffles = 16
n_N.BafflesPerModule := vectorize((1 + N_BafflesPerModule)*N_FlocChannelModules) - N_FlocChannelBaffles = [16; 16; 16; 16; 16]
b := N_BafflesPerModule + 1
n_b := N_FlocChannelModules - n_N.BafflesPerModule
N_BafflesPerModule =  # error: This variable is undefined.  # a,b,n.a,n.b verify the following equality:
n_N.BafflesPerModule =  # error
vectorize(N_BafflesPerModule*n_N.BafflesPerModule) + vectorize(b*n_b) == N_FlocChannelBaffles
b =  # error
n_b =  # error
N_FlocChannelsModules :=
    for i ∈ 0 .. rows(n_N.BafflesPerModule) - 1
        for j ∈ 0 .. n_N.BafflesPerModule[i] - 1
            N_modules[j, i] ← N_BafflesPerModule[i]
        s ← n_b[i]
        while s > 0
            j ← j + 1
            N_modules[j, i] ← b[i]
            s ← s - 1
    return N_modules
# Length of the connecting pipe. This length is dependent on the number of plates per module and on the spacing of the baffles in one channel.
L_FlocModuleCoupling := 4 cm  # always?
SocketDepth_FlocModuleCoupling := ND_SedModulePipe  # why?
L_FlocModuleCouplingPipe := L_FlocModuleCoupling - 2*SocketDepth_FlocModuleCoupling
L_FlocModulePipe :=
    for i ∈ 0 .. rows(N_FlocChannelsModules) - 1
        for j ∈ 0 .. cols(N_FlocChannelsModules) - 1
            l[i, j] ← (N_FlocChannelsModules[i, j] - 0.5)*B_FlocBaffle[j] - L_FlocModuleCouplingPipe/2 + T_FlocBaffle if i == 0
            l[i, j] ← (N_FlocChannelsModules[i, j] + 0.5)*B_FlocBaffle[j] - L_FlocModuleCouplingPipe if i == rows(N_FlocChannelsModules) - 1
            l[i, j] ← N_FlocChannelsModules[i, j]*B_FlocBaffle[j] - L_FlocModuleCouplingPipe otherwise
    return l
# This is the length of the last module pipe
L_FlocModulePipe =  # error
S_FlocBaffle = [0.556404; 0.556404; 0.556404; 0.556404; 0.543138] m
# Arraying in accordance to z. According to the photo, there were three pipes connecting a module in accordance to z. The following code tries to determine the z coordinates of the first pipe and the distance on which it is arrayed.
L_FlocModuleCommon := L_FlocBaffleLower - Z_FlocBaffles[1, 0] = 1.11281 m  # This is the length of the common part between the upper and the lower baffles.
S_SedPlateModuleMin = 0.02 m  # This is the minimal distance to the center of a pipe from the edge of the common zone.
Z_FlocModulePipe := Z_FlocBaffles[1, 0] + S_SedPlateModuleMin = 0.02 m  # This is the placement of the first pipe
# There is a set of two pipe in the y direction. The choice for the y coordinate of the origin of the pipe is completely random.
Y_FlocModulePipe := W_FlocChannel/8 = 20.8651 cm
# Here is given an array of the x coordinates of the different connecting pipes. The origin of every pipe is found at the start of every module
X_FlocModulePipe :=
    for j ∈ 0 .. N_FlocChannels - 1
        for i ∈ 0 .. rows(N_FlocChannelsModules) - 1
            x[i, j] ← X_FlocBaffles[i, j] - T_FlocBaffle if i == 0
            x[i, j] ← x[i - 1, j] + L_FlocModulePipe[i - 1, j] + L_FlocModuleCouplingPipe otherwise
    return x
X_FlocModulePipe =  # error
