# [reference: MtoATranslators.xmcd]
# [reference: MtoATranslatorsWrapped.xmcd]
# [reference: TankF.xmcd]
L_Box := 2 m
W_Box := 3 m
H_Box := 4 m
tank_dim := [L_Box; W_Box; H_Box]
Vol_Box := L_Box*W_Box*H_Box
Vol_Box = 24000 L
AC_Box := stack(Tank([0 m; 0 m; 0 m], tank_dim, 10 cm))
AC_Box = ["_-view o t _zoom w 0.11,-0.11,0 -2.11,3.11,4"; "_box 0,0,0 -2,3,4 _box 0.1,-0.1,-0.1 -2.1,3.1,4"; "_subtract 0.1,-0.1,-0.1  0,0,0 "]
L_Box = 2 m
W_Box = 3 m
H_Box = 4 m
