# Cdc Modular Design
# User Inputs
Q_Plant := 12
C_ChlorineDoseMax := 2*mg/L
# To be left undefined and inputed online by the user
C_ChlorineStockEst := 50*mg/L
Ti_ChlorineStock := 30 hr
# From Expert Inputs
# Basics
Country := 0
Language := 0
# Tabulated Constants
Re_PipeTransition := 2100
E_Pvc := 0.12 mm
E_Concrete := 2 mm
E_ConcreteLedge := 0.014 mm
Pi_Jet := 0.4
# This is an empirically determined factor to make the equation
# correct.
Pi_VenaContractaOrifice := 0.63
P_Atm := 1 atm
Nu_Air := 12*mm^2/s
Rho_Air := 1.204*kg/m^3
Rho_Clay := 2.65*gm/mL
# General Assumptions and Constants
T_PlantWall := 15 cm
T_ConcreteMin := 5 cm
EN_DrillSeries := 0  # 0 is English, 1 is metric
EN_TubeSeries := 0
W_HumanMin := 0.54 m
H_HumanAccess := 1.5 m  # The height of the walkway above the drain channel bottom so that someone can walk through the drain channel.
acad_version := 2008
H_Freefall := 0.1 m
H_PlantFreeboard := 0.1*m
EN_PlantDrains := 1  # Set to zero if drains on left, 1 if drains on right
D_Rebar := 1/2*in
ND_SpacerPipe := 3/4*in
S_Fitting := 5 cm  # minimum space between fittings in a tank or fittings and the wall of the tank.
W_ChannelMin := 15 cm  # Minimum channel width for constructability
W_DeepChannelMin := 30 cm  # Minimum channel width for a deep channel. Assumes you may need to stick your head in the channel.
H_DeepChannelMax := 60 cm  # The maximum depth of a channel, based on having your arm reach to the bottom of the channel.
S_ChannelPipeWall := 2 cm  # Extra space allowed on both sides of pipe to avoid interference with the channel walls
Π_Rectangular := 1/2  # Π.Rectangular is defined as the optimum "height over width ratio" (1/2) for a rectangular open channel
HL_ChannelMax := 5 cm
EN_MatApply := 0  # EN.MatApply equals 0 if materials are not to be applied, otherwise materials are applied
# Equals 1 to draw boxes showing max water levels, 0 normally
EN_Water := 0
# If EN_Water is set to 1, this controls the filter operation mode for which water/sand elevations are drawn. 0 for terminal, 1 for clean bed, and 2 for backwash.
EN_FilterWater := 2
# Entrance Tank
ND_EtFloat := 8 in
# Chemical Dose Controller
D_TubeEnglish := [3; 4; 5; 6; 8; 10]*in/32
D_CdcBarb := [0.047 in; 0.075 in; 2.5 mm; 3 mm; 4 mm; 0.201 in]
D_TubeMetric := [2; 3.175; 4; 5; 6; 6.5]*mm
D_CdcBarb1 := [0.047 in; 0.07 in; 0.075 in; 2.5 mm; 3 mm; 0.201 in]
E_Tube := 0 mm  # Tubing roughness height
# This is the estimated elevation difference between the water level in the constant head tank and the top of the entrance tank wall. The constant head tank water level is the same as the elevation of the outlet of the dosing tube when the lever arm is horizontal (zero flow). Therefore this height depends only on the hardware used to make the slider/drop tube assembly and to mount the lever arm to the entrance tank wall. Note that this will vary depending on hardware used, and is only defined here to calculate the elevation of the stock tanks, which can be approximate.
H_DoserAssembly := 6.77 cm
Π_LinearCdcError := 10 %
# Maximum error allowed between a linear flow vs tube head loss relationship and the actual performance (which is affected by non-linear minor losses), assuming calibration at the maximum flow rate
K_CdcTube := 8
# Estimated conservative minor loss coefficient for the small-diameter flexible tubing using fittings that have larger ID than the tubing and using a single tight radius bend in the tubing.
# Maximum head loss through the small-diameter tubing, which corresponds to the variation in water levels in the entrance tank and the difference between the maximum and minimum elevation of the dosing tube outlet attached to the lever arm.
HL_CoagCdc := .2 m
HL_ChlorCdc := 10 cm  # The maximum chlorine head loss is set to 10cm to keep the length of tubing low.
D_FltVlvOrificesAvail := [0.093 in; 0.187 in; 0.25 in; 0.312 in]
H_CdcFloatvalve := 5 cm  # Estimated distance between fluid level in constant head tank and orifice for float valve
# Design References
# [reference: MathFunctions.xmcd]
# [reference: PipeDatabase.xmcd]
# [reference: FluidsFunctions.xmcd]
# [reference: LinearCdc.xmcd]
# [reference: MtoATranslators.xmcd]
# [reference: MtoATranslatorsWrapped.xmcd]
# [reference: PlumbingF.xmcd]
# Cdc Code
L_CdcLever := 0.45 m  # assumed from Drew's drawing for now
W_LeverArm := 0.0032 m
D_LATeetoLAOrigin := 0.0079 m
# Length of the float pipe must fill both caps plus some.
L_CdcFloat := 2*(CapHeight(ND_EtFloat) - CapThickness(ND_EtFloat)) + 1 in
D_CdcCht := 6 in
Z_FloatTop := ZW_Et - HL_Flowmeasure + 1/2*L_CdcFloat  # The elevation of the float with the center of the float being at the bottom row of orifices of the LFOM.
D_LeverOrigintoArm := 0.0336 m  # Distance from the lever arm origin (which is on the tee holding the lever arm up) to the lever arm
H_LeverHole := 0.0312 m - 0.0095/2*m
# Distance from the top of the entrance tank to the to the middle of the lever arm hole for the cable - (minus the) radius of the hole
D_Cable := 0.1 in
L_Cable := Z_EtTop + H_LeverHole - Z_FloatTop
D_LABracketOrigintoEndBracket := 0.0079 m
# This is the distance from the lever arm bracket origin (at the center of the hole of the bracket holding up the lever arm) to the end of the bracket
D_LeverHole := 0.0063 m  # Distance from the float end of the lever arm to the middle of the hole where the float cable will be attached.
D_LABOrigintoLAOriginX := 0.032 m
D_LABOrigintoLAOriginZ := 0.0254 m  # Edited DLABOrigintoLAOriginZ to accmodate dimensions from McMaster vs Inserted Drawing
# these axes assume the lever arm is oriented along the y-axis
# but we are now rotating it!!!
T_CdcDt := 0.003 m  # Thickness of the drop tube
L_LAOriginToDtX := 0.0290 m  # Distance from the lever arm origin to the center of the drop tube in the x direction
L_LAOriginToDtY := 0.7812 m  # Distance from the lever arm origin to the outside center of the top part of the drop tube in the y direction
L_LAOriginToDtZ := 0.0429 m  # Distance from the lever arm origin to the drop tube in the z direction
L_LAOriginToDtCenterX := 0.0290 m  # Distance from the lever arm origin to the center of the drop tube in the x direction
T_CdcReducer := 0.0095 m  # Measured from CDC research team's apparatus
L_LAOriginToReducerX := 0.0290 m  # Distance from the lever arm origin to the center of the reducer in the x direction
L_LAOriginToReducerY := 0.7315 m  # Distance from the lever arm origin to the outside center of the top part of the reducer in the y direction
L_LAOriginToReducerZ := 0.1094 m  # Distance from the lever arm origin to the center of the large part of the reducer in the z direction
L_LAOriginToReducerCenterX := 0.0290 m  # Distance from the lever arm origin to the center of the reducer in the x direction
L_LAOriginToReducerCenterY := 0.7919 m  # Distance from the lever arm origin to the center of the reducer in the y direction
L_LAOriginToDtX2 := 0.0396 m
L_LAOriginToDtY2 := 0.7919 m
L_Slider := 3 in
R_LArmBar := 3/16*in
D_LArmBar := 3/8*in
W_LBracket := 5/8*in
L_LBracket := 2 in
T_LBracket := .08 in
L_LArmBar := 4 in
W_Slider := 3.2*10^-3*m
H_LeverArm := 0.0254 m
W_LeverArm = 0.0032 m
ND_DropTube := 1/2*in
L_DropTube := .61 m
H_Slider := 5/8*in
LA_Origin := [0 m; 0 m; 0 m]
LA2_Origin := [LA_Origin[0]; LA_Origin[1] - ConRadius(ND_EtFloat) - S_EtFloat/2; LA_Origin[2]]
LA3_Origin := [LA_Origin[0]; LA_Origin[1] + ConRadius(ND_EtFloat) + S_EtFloat/2; LA_Origin[2]]
L_LAOriginToReducerX2 := 0.0893 m
L_LAOriginToReducerY2 := 0.7919 m
LADtFitting_Origin := [
    LA_Origin[0] + L_CdcLever - L_LAOriginToDtY + innerdiameter(ND_DropTube, PS_Modules)/2 - .02 in;
    LA_Origin[1] + 1/8*in + L_LAOriginToDtCenterX;
    L_LAOriginToDtZ + LA_Origin[2]
]
LAReducerFitting_Origin := [-L_LAOriginToReducerY - T_CdcReducer + L_CdcLever/2; L_LAOriginToReducerX; L_LAOriginToReducerZ] + LA_Origin
LADt_Center := [
    LA_Origin[0] + L_CdcLever - L_LAOriginToDtY;
    LA_Origin[1] + 1/8*in + L_LAOriginToDtCenterX;
    LA_Origin[2] + L_LAOriginToDtZ + H_LeverArm
]
LAReducer_Center := LA_Origin + [-L_LAOriginToReducerCenterY; L_LAOriginToReducerCenterX; L_LAOriginToReducerZ]
Z_CdcFloatValveOrifice := 2.558 m
CHT_Origin := [LA_Origin[0] - L_ChemTankShift + D_CdcCht/2; LA_Origin[1]; Z_CdcFloatValveOrifice]
# CDC Script
CdcLayer := layer_new("CdcLayer", black)
LArm1 := BoxF([LA_Origin[0] - L_CdcLever; LA_Origin[1] + 1/8*in; LA_Origin[2]], [LA_Origin[0] + L_CdcLever; LA_Origin[1]; LA_Origin[2] + H_LeverArm], [0; 0; 0]*deg)
DropTube1 := PipeF(LADt_Center, L_DropTube, [0; -90]*deg, ND_DropTube, PS_Modules)
LarmBar1 := CylinderF([
    LA_Origin[0] + W_LBracket/2;
    LA_Origin[1] - T_LBracket + L_LArmBar/2;
    LA_Origin[2] + L_LBracket/2 - L_LBracket/8
], R_LArmBar, L_LArmBar, [90; 0]*deg)
LBracketLA1 := LBracket2F([LA_Origin[0]; LA_Origin[1] - L_LArmBar/2 + zc; LA_Origin[2] - L_LBracket + W_LBracket + D_LArmBar])
InsertCht := insertdwg("https://confluence.cornell.edu/download/attachments/173604905/CdcCht.dwg", CHT_Origin, 1, 1, 90 deg)
FreezeCdcLayer := FreezeLayer("CdcLayer")
ConnectCylinderLayer := layer_new("ConnectCylinder", ltgrey)
LarmBar1 := CylinderSUBF([
    LA_Origin[0] + W_LBracket/2;
    LA_Origin[1] - T_LBracket + L_LArmBar/2;
    LA_Origin[2] + L_LBracket/2 - L_LBracket/8
], R_LArmBar, L_LArmBar, [0; 0]*deg, ["CdcLayer"])
FreezeConnectCylinderLayer := FreezeLayer("ConnectCylinder")
SliderLayer := layer_new("Sliders", dkgrey)
Slider1FirstSide := BoxF([
    LA_Origin[0] - L_CdcLever + L_Slider - .3*L_Slider;
    LA_Origin[1] - W_LeverArm;
    LA_Origin[2] + H_LeverArm + W_Slider
], [
    LA_Origin[0] - L_CdcLever + 2*L_Slider - .3*L_Slider;
    LA_Origin[1] - W_LeverArm + W_Slider;
    LA_Origin[2] + H_LeverArm - H_Slider + W_Slider
], [0; 0; 0]*deg)
Slider1TopSide := BoxF([
    LA_Origin[0] - L_CdcLever + L_Slider - .3*L_Slider;
    LA_Origin[1] - W_LeverArm;
    LA_Origin[2] + H_LeverArm + W_Slider
], [
    LA_Origin[0] - L_CdcLever + 2*L_Slider - .3*L_Slider;
    LA_Origin[1] - W_LeverArm + W_Slider;
    LA_Origin[2] + H_LeverArm - H_Slider + W_Slider
], [0; 0; 90]*deg)
Slider1SecondSide := BoxF([
    LA_Origin[0] - L_CdcLever + L_Slider - .3*L_Slider;
    LA_Origin[1] - W_LeverArm + H_Slider - W_Slider;
    LA_Origin[2] + H_LeverArm + W_Slider
], [
    LA_Origin[0] - L_CdcLever + 2*L_Slider - .3*L_Slider;
    LA_Origin[1] - W_LeverArm + H_Slider;
    LA_Origin[2] + H_LeverArm - H_Slider + W_Slider
], [0; 0; 0]*deg)
FreezeSliders := FreezeLayer("Sliders")
CdcLayerAll := layer_new("CdcAll", ltgrey)
FloatCable := CylinderF([
    Et_Origin[0] - L_Et - T_PlantWall + D_LATeetoLAOrigin + L_CdcFloatArm - D_LeverHole;
    LA_Origin[1] + W_LeverArm/2;
    Z_FloatTop
], D_Cable, L_Cable, [0; 90]*deg)
FreezeCdcAll := FreezeLayer("CdcAll")
FloatCapsLayer := layer_new("CdcFloatCapPlu", green)
CdcFloatCapTop := CapF([
    Et_Origin[0] - L_Et - T_PlantWall + D_LATeetoLAOrigin + L_CdcFloatArm - D_LeverHole;
    LA_Origin[1] + W_LeverArm/2;
    Z_FloatTop - CapThickness(ND_EtFloat)
], [0; -90]*deg, ND_EtFloat)
CdcFloatCapBottom := CapF([
    Et_Origin[0] - L_Et - T_PlantWall + D_LATeetoLAOrigin + L_CdcFloatArm - D_LeverHole;
    LA_Origin[1] + W_LeverArm/2;
    Z_FloatTop - CapThickness(ND_EtFloat) - L_CdcFloat
], [0; 90]*deg, ND_EtFloat)
FloatPipeLayer := layer_new("CdcFloatPipePlu", blue)
CdcFloatPipe := PipeF([
    Et_Origin[0] - L_Et - T_PlantWall + D_LATeetoLAOrigin + L_CdcFloatArm - D_LeverHole;
    LA_Origin[1];
    Z_FloatTop - CapThickness(ND_EtFloat)
], L_CdcFloat, [0; -90]*deg, ND_EtFloat, PS_Default)
Cdc1_Script := stack(CdcLayer, CdcLayerAll, LBracketLA1, LArm1, DropTube1, LarmBar1, InsertCht, FloatCable, FreezeCdcLayer, FreezeCdcAll, SliderLayer, Slider1FirstSide, Slider1TopSide, Slider1SecondSide, FreezeSliders, Slider1TopSide, FloatCapsLayer, CdcFloatCapTop, CdcFloatCapBottom, FreezeLayer("CdcFloatCapPlu"), FloatPipeLayer, CdcFloatPipe, FreezeLayer("CdcFloatPipePlu"))
OD_CdcFitting := 5/32*in  # Outer diameter of fitting- measured from CDC research team's fitting
ID_CdcFitting := 0.126 in  # Inner diameter of fitting- measured from CDC research team's fitting
L_CdcFitting := 0.75 in  # Length of fitting - measured from CDC research team's fitting
CdcFittingsLayer := layer_new("CdcFittings", ltgrey)
CdcFittingOuter :=
    CylinderSUBF(LADtFitting_Origin, OD_CdcFitting/2, L_CdcFitting, [90; 0]*deg, ["CdcLayer"]) if N_FiCoagCdcTubes ≤ 3
    CylinderSUBF(LAReducerFitting_Origin, OD_CdcFitting/2, L_CdcFitting, [90; 0]*deg, ["CdcLayer"]) otherwise
CdcFittingOuter_Array :=
    ArrayLastPolar(LADt_Center, N_CoagCdcTubes, 180 deg) if N_FiCoagCdcTubes ≤ 3
    ArrayLastPolar(LAReducer_Center, N_CoagCdcTubes, 180 deg) otherwise
SliderDtConnect1 := CylinderSUBF([
    LA_Origin[0] + L_CdcLever - L_LAOriginToDtY;
    LA_Origin[1] + W_LeverArm;
    LA_Origin[2] + .75*H_LeverArm
], ID_CdcFitting/2, 2.1*L_CdcFitting, [180; 0]*deg, ["CdcLayer"; "Sliders"])
ScrewHead1 := CylinderF([
    LA_Origin[0] + L_CdcLever - L_LAOriginToDtY - .65*L_Slider;
    LA_Origin[1] + W_LeverArm + 1.7*L_CdcFitting;
    LA_Origin[2] + .75*H_LeverArm
], 1.5*OD_CdcFitting, .2*L_CdcFitting, [90; 0]*deg)
Screw1 := CylinderSUBF([
    LA_Origin[0] + L_CdcLever - L_LAOriginToDtY - .65*L_Slider;
    LA_Origin[1] + W_LeverArm;
    LA_Origin[2] + .75*H_LeverArm
], ID_CdcFitting/2, 1.5*L_CdcFitting, [180; 0]*deg, ["Sliders"])
FreezeCdcFittings := FreezeLayer("CdcFittings")
CdcFittingInner :=
    CylinderF(LADtFitting_Origin, ID_CdcFitting/2, L_CdcFitting, [180; 0]*deg) if N_FiCoagCdcTubes ≤ 3
    CylinderF(LAReducerFitting_Origin, ID_CdcFitting/2, L_CdcFitting, [180; 0]*deg) otherwise
CdcFittingInner_Array :=
    ArrayLastPolar(LADt_Center, N_CoagCdcTubes, 180 deg) if N_FiCoagCdcTubes ≤ 3
    ArrayLastPolar(LAReducer_Center, N_CoagCdcTubes, 180 deg) otherwise
GroupFitting := GroupAll("DeleteMe")
SubtractFittingInner := SubtractF(["CdcFittings"], "DeleteMe")
FreezeCdcFittings := FreezeLayer("CdcFittings")
FlexConnectLayer := layer_new("FlexConnect", red)
SweepPoint1 := LA_Origin + [-.0894; -.792; .1092]*m
SweepPoint2 := SweepPoint1 + [1; 0; 0]*in
SweepPoint5 := CHT_Origin + [.1432; 0; -.0629]*m
SweepPoint4 := SweepPoint5 + [1; 0; 0]*in
SweepPoint3 := [(SweepPoint1[0] + SweepPoint5[0])/2; (SweepPoint1[1] + SweepPoint5[1])/2; SweepPoint1[2] - 50 cm]
SweepPathPoints := [SweepPoint1; SweepPoint2; SweepPoint3; SweepPoint4; SweepPoint5]
FlexTube_Trial := FlexTube(SweepPathPoints, .125 in, .2 in, "FlexConnect", red)
FlexConnectLayer, FlexTube_Trial, FreezeLayer("FlexConnect")
CdcFittings1_Script := stack(CdcFittingsLayer, CdcFittingOuter, CdcFittingOuter_Array, SliderDtConnect1, Screw1, ScrewHead1, FreezeCdcFittings, CdcFittingInner, CdcFittingInner_Array, GroupFitting, SubtractFittingInner)
SF_CalCol := 1.25
Ti_Res := 1.25*min
H_CalCol := 30 cm
Q_CoagCalColMax := SF_CalCol*Q_CoagStock
Vol_CoagCalCol := Ti_Res*Q_CoagCalColMax
D_inCoagCCMin := sqrt(4*Vol_CoagCalCol/(π*H_CalCol))
ND_CoagCalCol := NominalDiameter(D_inCoagCCMin, PS_Default)
D_inCoagCalCol := innerdiameter(ND_CoagCalCol, PS_Default)
Q_ChlorCalColMax := SF_CalCol*Q_ChlorStock
Vol_ChlorCalCol := Ti_Res*Q_ChlorCalColMax
D_inChlorCCMin := sqrt(4*Vol_ChlorCalCol/(π*H_CalCol))
ND_ChlorCalCol := NominalDiameter(D_inChlorCCMin, PS_Default)
D_inChlorCalCol := innerdiameter(ND_ChlorCalCol, PS_Default)
Q_FCCalColMax := SF_CalCol*Q_FiCoagStock
Vol_FCCalCol := Ti_Res*Q_FCCalColMax
D_inFCCCMin := sqrt(4*Vol_FCCalCol/(π*H_CalCol))
ND_FCCalCol := NominalDiameter(D_inFCCCMin, PS_Default)
SF_CalCol := 1.25
Ti_Res := 1.25*min
H_CalCol := 30 cm
Q_CoagCalColMax := SF_CalCol*Q_CoagStock
Vol_CoagCalCol := Ti_Res*Q_CoagCalColMax
D_inCoagCCMin := sqrt(4*Vol_CoagCalCol/(π*H_CalCol))
ND_CoagCalCol := NominalDiameter(D_inCoagCCMin, PS_Default)
D_inCoagCalCol := innerdiameter(ND_CoagCalCol, PS_Default)
Q_ChlorCalColMax := SF_CalCol*Q_ChlorStock
Vol_ChlorCalCol := Ti_Res*Q_ChlorCalColMax
D_inChlorCCMin := sqrt(4*Vol_ChlorCalCol/(π*H_CalCol))
ND_ChlorCalCol := NominalDiameter(D_inChlorCCMin, PS_Default)
D_inChlorCalCol := innerdiameter(ND_ChlorCalCol, PS_Default)
Q_FCCalColMax := SF_CalCol*Q_FiCoagStock
Vol_FCCalCol := Ti_Res*Q_FCCalColMax
D_inFCCCMin := sqrt(4*Vol_FCCalCol/(π*H_CalCol))
ND_FCCalCol := NominalDiameter(D_inFCCCMin, PS_Default)
D_inFCCalCol := innerdiameter(ND_FCCalCol, PS_Default)
CalCol_Origin := [
    ChemPlatform_Origin[0] + L_EtChemPlatform + ConRadius(ND_FCCalCol);
    CoagTank_Origin[1] + R_CoagTank + T_ChemTankWall + S_ChemTankBorder - 0.5*W_EtChemPlatform;
    Z_CoagulantOutlet
]
TopCap_Origin := [CalCol_Origin[0]; CalCol_Origin[1]; CalCol_Origin[2] + H_CalCol]
CoagCalCol_Origin := [
    CalCol_Origin[0] - ConRadius(ND_FCCalCol) + ConRadius(ND_CoagCalCol);
    CalCol_Origin[1] - ConRadius(ND_CoagCalCol) - ConRadius(ND_FCCalCol) - 2*zc;
    Z_CoagulantOutlet
]
CoagTopCap_Origin := [CoagCalCol_Origin[0]; CoagCalCol_Origin[1]; CoagCalCol_Origin[2] + H_CalCol]
ChlorCalCol_Origin := [
    CalCol_Origin[0] - ConRadius(ND_FCCalCol) + ConRadius(ND_ChlorCalCol);
    CalCol_Origin[1] + ConRadius(ND_FCCalCol) + ConRadius(ND_ChlorCalCol) + 2*zc;
    Z_CoagulantOutlet
]
ChlorTopCap_Origin := [ChlorCalCol_Origin[0]; ChlorCalCol_Origin[1]; ChlorCalCol_Origin[2] + H_CalCol]
MakeCalColLayer := layer_new("CdcCalColumnPlu", ltpurple)
MainFCCalCol := PipeF(CalCol_Origin, H_CalCol, [0; 90]*deg, ND_FCCalCol, PS_Default)
MainCoagCalCol := PipeF(CoagCalCol_Origin, H_CalCol, [0; 90]*deg, ND_CoagCalCol, PS_Default)
MainChlorCalCol := PipeF(ChlorCalCol_Origin, H_CalCol, [0; 90]*deg, ND_ChlorCalCol, PS_Default)
FreezeCalCol := FreezeLayer("CdcCalColumnPlu")
MakeCapsLayer := layer_new("CdcColumnCapsPlu", blue2)
TopCap := CapF(TopCap_Origin, [0; -90]*deg, ND_FCCalCol)
BottomCap := CapF(TopCap_Origin - [0 m; 0 m; H_CalCol], [0; 90]*deg, ND_FCCalCol)
CoagTopCap := CapF(CoagTopCap_Origin, [0; -90]*deg, ND_CoagCalCol)
CoagBottomCap := CapF(CoagTopCap_Origin - [0 m; 0 m; H_CalCol], [0; 90]*deg, ND_CoagCalCol)
ChlorTopCap := CapF(ChlorTopCap_Origin, [0; -90]*deg, ND_ChlorCalCol)
ChlorBottomCap := CapF(ChlorTopCap_Origin - [0 m; 0 m; H_CalCol], [0; 90]*deg, ND_ChlorCalCol)
FreezeCapsLayer := FreezeLayer("CdcColumnCapsPlu")
# To draw the hole in the top cap, we are subtracting a cylinder from the top cap layer
Cylinder_Origin := [CalCol_Origin[0]; CalCol_Origin[1]; CalCol_Origin[2] + H_CalCol/2]
CoagCylinder_Origin := [CoagCalCol_Origin[0]; CoagCalCol_Origin[1]; CoagCalCol_Origin[2] + H_CalCol/2]
ChlorCylinder_Origin := [ChlorCalCol_Origin[0]; ChlorCalCol_Origin[1]; ChlorCalCol_Origin[2] + H_CalCol/2]
R_Cylinder := .5 cm
DrawCylinder := CylinderF(Cylinder_Origin, R_Cylinder, H_CalCol, [0; 90]*deg)
DrawCoagCylinder := CylinderF(CoagCylinder_Origin, R_Cylinder, H_CalCol, [0; 90]*deg)
DrawChlorCylinder := CylinderF(ChlorCylinder_Origin, R_Cylinder, H_CalCol, [0; 90]*deg)
LayCylinder := GroupAll("DeleteMe")
MakeHole := SubtractF(["CdcColumnCapsPlu"], "DeleteMe")
LayStand := layer_new("CdcCalColumnStand", yellow)
BoardDim_Vert := [
    2*ConRadius(ND_CoagCalCol) + 2*ConRadius(ND_FCCalCol) + 2*ConRadius(ND_ChlorCalCol) + 4*zc;
    1.5*in;
    H_CalCol + Z_CoagulantOutlet - (ChemPlatform_Origin[2] + ChemPlatform_Dimensions[2])
]
VertBoard_Origin := [
    CoagCalCol_Origin[0] - ConRadius(ND_CoagCalCol);
    CoagCalCol_Origin[1] + ConRadius(ND_CoagCalCol);
    ChemPlatform_Origin[2] + ChemPlatform_Dimensions[2]
]
FarCorner_VertBoard := BoardDim_Vert + VertBoard_Origin
BoardDim_Horiz := [BoardDim_Vert[0]; BoardDim_Vert[2]/(2*tan(60*deg)); 1.5*in]
HorizBoard_Origin := VertBoard_Origin + [0; BoardDim_Vert[1]; 0]
FarCorner_HorizBoard := BoardDim_Horiz + HorizBoard_Origin
BoardDim_Slant := [BoardDim_Vert[0]; 1.5 in; BoardDim_Vert[2]/(2*sin(60 deg))]
SlantBoard_Origin := FarCorner_HorizBoard
FarCorner_SlantBoard := SlantBoard_Origin + [-BoardDim_Slant[0]; -BoardDim_Slant[1]; BoardDim_Slant[2]]
MakeSlantBoard := BoxF(SlantBoard_Origin, FarCorner_SlantBoard, [0; 0; 30]*deg)
MakeVertBoard := BoxF(VertBoard_Origin, FarCorner_VertBoard, [0; 0; 0])
MakeHorizBoard := BoxF(HorizBoard_Origin, FarCorner_HorizBoard, [0; 0; 0])
RotateSupport := Rotate_All(VertBoard_Origin, 90 deg)
MoveSupport := MoveAll(VertBoard_Origin, VertBoard_Origin - [0 m; 2*ConRadius(ND_CoagCalCol); 0 m])
FreezeBoards := FreezeLayer("CdcCalColumnStand")
CdcCalColumn1_Script := stack(MakeCalColLayer, MainChlorCalCol, FreezeCalCol, MakeCapsLayer, ChlorTopCap, ChlorBottomCap, FreezeCapsLayer, DrawChlorCylinder, LayCylinder, MakeHole, LayStand, MakeSlantBoard, MakeVertBoard, MakeHorizBoard, RotateSupport, MoveSupport, FreezeBoards)
AC_Cdc1 := stack(Cdc1_Script, CdcFittings1_Script, CdcCalColumn1_Script)
AC_Cdc1 := □  # error: This placeholder is empty.
