# AguaClara Design Tool
Q_Plant := □
Q_Plant := 40*L/s
HL_FlocMax := □
H_SedSlopesToFlocWeirMin := □
HL_FlocMax := 40 cm
T_FlocSlab := □
H_SedSlopesToFlocWeirMin := 25 cm
T_SedWall := □
T_FlocSlab := 15 cm
T_SedDividingWall := □
T_SedWall := 15 cm
T_SedChannelWall := □
T_SedDividingWall := 15 cm
T_FlocWall := □
T_SedChannelWall := 15 cm
T_FlocDividingWall := □
T_FlocWall := 15 cm
T_FiWall := □
T_FlocDividingWall := 15 cm
T_FiBoxWall := □
T_FiWall := 25 cm
T_PlantWall := □
T_FiBoxWall := 15 cm
T_PlantFloor := □
T_PlantWall := 15 cm
T_ChemSlab := □
T_PlantFloor := 20 cm
T_DrainChannelWall := □
T_ChemSlab := 15 cm
T_DrainChannelWall := 15 cm
C_CoagDoseMax := □
C_CoagDoseMax := 40*mg/L
C_ChlorDoseAve := □
C_ChlorDoseAve := 1*mg/L
method := "EtFlocSedFi"
Mod := 0
## References
# Mathcad to AutoCAD translators:
# [reference: MtoATranslators.xmcd]
# The wrapped MtoA translator contains the functions that the user will want to access. These functions will draw pieces with full functionality - specifying the location, dimension, and orientation of the object. Also, it contains layer control and subtraction capabilities for grouped objects.
# [reference: MtoATranslatorsWrapped.xmcd]
# Plant design calculations:
# [reference: ExpertInputs.xmcd]
# [reference: MathFunctions.xmcd]
# [reference: PipeDatabase.xmcd]
# [reference: MaterialsDatabase.xmcd]
# [reference: FluidsFunctions.xmcd]
# [reference: SedimentationTank.xmcd]
# [reference: LFOM.xmcd]
# [reference: FlocculatorEntranceTank.xmcd]
# [reference: StackedRapidSandFilter.xmcd]
# [reference: ChemicalDoseController.xmcd]
# AutoCAD drawing functions:
# [reference: ChannelF.xmcd]
# [reference: PlumbingF.xmcd]
# [reference: TankF.xmcd]
# [reference: StairsF.xmcd]
# [reference: DrainChannelF.xmcd]
# AutoCAD script files:
# [reference: FlocculatorAC.xmcd]
# [reference: SedimentationTankAC.xmcd]
# [reference: EntranceTankCompactAC.xmcd]
# [reference: StackedRapidSandFilterAC.xmcd]
# [reference: ChemStockTanksAC.xmcd]
# [reference: OperatorAccessAC.xmcd]
# [reference: CdcAC.xmcd]
# Materials list:
# [reference: MaterialsList.xmcd]
# Layouts:
# This file will execute at the very end to create multiple views of the entire plant in paperspace
# [reference: LayoutsAC.xmcd]
# Section Cuts:
# This file will create section cuts in paper space... eventually
# [reference: SectionCutsAC.xmcd]
## All variables displayed must have the standard SI units. They may not have units attached by the user.
# General variables displayed
# Plant summary calculations
HL_PlantTotal := ZW_EtMax - Z_FiExitBottom
Q_Plant = 0.04 m^3/s
HL_PlantTotal = 2.39322 m
H_PlantFreeboard = 0.1 m
# Entrance tank variables displayed
# Tank
L_EtMax = 1.90938 m
H_Et = 2.53043 m
L_Et = 1.65672 m
W_Et = 1 m
H_EtApparent = 1.41525 m
AN_EtSlope1 = 0.872665
AN_EtSlope2 = 0.356461
# Parameters
V_EtCaptureBod = 0.008 m/s
V_EtCapture = 0.00829719 m/s
# Sedimentation plates
L_EtPlate = 0.5 m
L_EtTopPlate = 0.811081 m
N_EtPlates = 16
S_EtPlate = 0.025 m
AN_EtPlate = 0.872665
ND_EtMod = 0.0127 m
PS_EtModStr = "SDR 13.5"
ND_EtModSpacer = 0.01905 m
PS_EtModSpacerStr = "SDR 17"
ND_EtPlateSupport = 0.0762 m
PS_EtPlateSupportStr = "SDR 26"
T_EtPlate = 0.002 m
# Rapid mix
ND_RMPipe = 0.381 m
PS_RMPipeStr = "SDR 41"
ED_RapidMix = 3 m^2/s^3
D_RMOrifice = 0.223358 m
HL_RMOrifice = 0.133877 m
HL_RMPipe = 0.00806258 m
L_FlocContact = 0.0742494 m
H_FlocContact = 1.80327 m
Ti_FlocContact = 3.34729 s
Pi_VCOrifice = 0.63
Pi_JetRound = 0.5
# Drains
ND_EtDrain = 0.1524 m
L_EtDrainStopper = 2.55742 m
PS_EtDrainStr = "SDR 41"
# Flow measurement
HL_Lfom = 0.2 m
D_LfomOrifices = 0.04445 m
B_LfomRows = 0.05 m
N_LfomOrifices = [14; 4; 5; 3]
H_LfomOrifices = [0.022225; 0.072225; 0.122225; 0.172225] m
N_LfomRows = 4
# Chemical dose controller variables displayed
H_CoagTankAboveHeadTank = 0.3 m
ND_EtFloat = 0.2032 m
HL_Cdc = 0.2 m
# Coagulant
ID_CoagTube = 0.003175 m
C_CoagStock = 159.091 kg/m^3
C_CoagDoseMax = 0.04 kg/m^3
Q_CoagMax = 1.00571e-5 m^3/s
N_CoagTubes = 4
N_CoagTubesActive = 3
L_CoagTube = 0.981625 m
Vol_CoagStock = 1100 L
M_CoagSack = 25 kg
N_CoagSacks = 7
Nu_CoagStock = 1.35062e-6 m^2/s
ND_CoagColumn = 0.01905 m
ID_CoagColumn = 0.0209296 m
Ti_CoagColumnMin = 17.1044 s
H_CoagColumnScale = 0.5 m
D_CoagFloatValveOrifice = 0.0047498 m
HL_CoagFloatValveOrifice = 0.0413844 m
# Chlorine
ID_ChlorTube = 0.003175 m
C_ChlorStock = 7.76147 kg/m^3
C_ChlorDoseMax = 0.002 kg/m^3
Q_ChlorMax = 1.03073e-5 m^3/s
N_ChlorTubes = 4
N_ChlorTubesActive = 3
L_ChlorTube = 1.28707 m
Vol_ChlorStock = 450 L
M_ChlorStock = 4.98952 kg
Nu_ChlorStock = 1e-6 m^2/s
ND_ChlorColumn = 0.01905 m
ID_ChlorColumn = 0.0209296 m
Ti_ChlorColumnMin = 16.6892 s
H_ChlorColumnScale = 0.5 m
D_ChlorFloatValveOrifice = 0.0047498 m
HL_ChlorFloatValveOrifice = 0.043469 m
# Flocculator variables displayed
# Tank
H_Floc = 2.08849 m
L_Floc = 6.69302 m
W_FlocChannel = 1 m
W_FlocChannelMaxPlate = 1.06 m
W_FlocChannelMinPlate = 0.53 m
W_FlocChannelMin = 0.53 m
W_FlocChannelMinEfficient = 0.347507 m
N_FlocChannels = 2
HW_FlocEnd = 1.50404 m
T_FlocSlab = 0.15 m
Vol_Floc = 20220.6 L
H_FlocPort = 1.10683 m
W_FlocPort = 0.187219 m
# Drains
ND_FlocDrain = 0.1524 m
PS_FlocDrainStr = "SDR 41"
Q_FlocDrain = 0.0224673 m^3/s
# Parameters
HL_Floc = 0.48445 m
HL_FlocMax = 0.4 m
CP_Floc = 80.9503 m^(2/3)
V_Floc = 0.193032 m/s
ED_FlocAve = 0.0119555 m^2/s^3
ED_FlocAveMinSettling = 0.005 m^2/s^3
ED_FlocMax = 0.0239111 m^2/s^3
Ti_Floc = 505.514 s
Ti_FlocActive = 404.228 s
G_FlocAve = 109.341 1/s
GTheta_Floc = 44198.8
CP_FlocBod = 75 m^(2/3)
Alpha_EpsilonFloc = 2
Alpha_PsiFloc = 0.890899
Pi_JetPlane = 0.225
Ti_FlocDrain = 900 s
Pi_HSMin = 3
Pi_HSMax = 6
Pi_HSTransition = 5
K_FlocBaffle = 2.5
Pi_VCBaffle = 0.387426
Vol_FlocBod = 15599.8 L
W_FlocChannelCP = 0.993065 m
S_FlocBaffleMin = 0.219506 m
HL_FlocBod = 0.4 m
ED_FlocAveBod = 0.0100582 m^2/s^3
ED_FlocAveCP = 0.0100582 m^2/s^3
Ti_FlocMinCP = 389.995 s
Vol_FlocMinCP = 15599.8 L
ED_FlocAveMax = 0.0100582 m^2/s^3
Nu_Water = 1e-6 m^2/s
Vol_FlocMinChannels = 5980.68 L
# Baffles
S_FlocBaffle = 0.207219 m
T_FlocBaffle = 0.002 m
B_FlocBaffle = 0.209219 m
H_FlocBaffleLow = 1.29682 m
H_FlocBaffleHigh = 1.88127 m
S_FlocBaffleSetBackPlastic = 0.02 m
N_FlocChannelBaffles = 31
N_FlocFirstChannelBaffles = 23
N_FlocLastChannelBaffles = 28
N_FlocBaffles = 51
N_FlocChannelSpaces = 32
ND_FlocMod = 0.0127 m
PS_FlocModStr = "SDR 13.5"
ND_FlocSpacer = 0.01905 m
PS_FlocSpacerStr = "SDR 17"
# Obstacles
ND_FlocObs = 0.1524 m
H_FlocObs = 0.752021 m
N_FlocSpaceExpansions = 2
N_FlocExpansions = 102
CP_FlocExpansion = 0.793631 m^(2/3)
PS_FlocObsStr = "SDR 41"
W_FlocObstacleWake = 0.126937 m
N_FlocSpaceObstacles = 1
# Sedimentation tank variables displayed
# General parameters
N_SedTanks = 7
Q_Sed = 0.00571429 m^3/s
V_SedUpBod = 0.001 m/s
# design constraints
V_SedCBod = 0.00012 m/s
V_SedUp = 0.00100476 m/s
# Actual values from this design
V_SedC = 0.000109092 m/s
Ti_Sed = 1416.37 s
# General dimensions
W_Sed = 1.06 m
L_Sed = 6.69302 m
H_Sed = 1.79849 m
HW_Sed = 1.6922 m
L_SedUpflow = 5.36532 m
W_SedSideSlopes = 0.489233 m
H_SedSideSlopes = 0.583045 m
H_SedFlocWeir = 0.833045 m
H_SedLamellaBottom = 0.981305 m
HW_Sed = 1.6922 m
AN_SedSlope = 0.872665
AN_SedHopperSlopeMin = 0.666405
# Inlet channel
HW_SedInletChannel = 0.370458 m
W_SedInletChannelPreWeir = 0.441157 m
W_SedInletChannelPostWeir = 0.15 m
W_SedInletChannel = 0.641157 m
L_SedChannel = 8.47 m
H_SedInletChannel = 0.470458 m
H_SedWeirInlet = 0.390458 m
HL_SedWeirInlet = 0.0186109 m
H_SedInletChannel = 0.470458 m
ND_SedChannelDrain = 0.1524 m
PS_SedChannelDrainStr = "SDR 41"
H_SedIChanStep = 0.047593 m
H_SedIChanLastCoupling = 0.285558 m
HL_SedInlet =  # error: This variable is undefined.
# Exit channel
W_SedExitChannelPreWeir = 0.15 m
W_SedExitChannelPostWeir = 0.286538 m
W_SedExitChannel = 0.486538 m
H_SedExitChannel = 0.470458 m
H_SedWeirExit = 0.305558 m
H_SedExitChannel = 0.470458 m
HW_SedExitChannel = 0.324169 m
# Exit launder
ND_SedLaunder = 0.1524 m
PS_SedLaunderStr = "SDR 41"
N_SedLaunderOrifices = 51
D_SedLaunderOrifice = 0.015875 m
L_SedLaunder = 5.34457 m
HL_SedLaunderOrifice = 0.041164 m
B_SedLaunderOrifice = 0.103762 m
# Inlet manifold
ND_SedManifold = 0.2032 m
PS_SedManStr = "SDR 41"
ND_SedDiffuser = 0.0254 m
PS_SedDiffuserStr = "SDR 26"
ND_SedJetReverser = 0.0762 m
PS_SedJetReverserStr = "SDR 26"
L_SedManifoldDiffuser = 0.15 m
N_SedManifoldPorts = 88
ED_SedInlet = 0.133503 m^2/s^3
Q_SedManifoldPort = 6.49351e-5 m^3/s
D_SedManifoldPort = 0.03175 m
B_SedDiffuser = 0.06 m
L_SedManHorizPipe2 = 5.29659 m
W_SedDiffuserInner = 0.003175 m
H_JetReverserToDiffusers = 0.03 m
HL_SedDiffuser = 0.0062888 m
# Plate settlers
L_SedPlate = 0.5 m
W_SedPlate = 1.06 m
T_SedPlate = 0.002 m
B_SedPlate = 0.027 m  # center to center distance between lamella
S_SedPlate = 0.025 m  # spacing between lamella
N_SedPlates = 165  # Number of plates per sedimentation tank
N_SedPlatesTotal = 1155  # Number of plates for the entire plant
N_SedModules = 15  # Number of modules per bay
N_SedModPlates = 11  # Number of plates per module
AN_SedPlate = 1.0472
ND_SedMod = 0.0127 m
PS_SedModStr = "SDR 13.5"
ND_SedModSpacer = 0.01905 m
PS_SedModSpacerStr = "SDR 17"
ND_SedPlateFrame = 0.0381 m
PS_SedPlateFrameStr = "SDR 26"
ND_SedHopperDrain = 0.0254 m
PS_SedHopperDrainStr = "SDR 26"
ND_SedToFiPipe = 0.2032 m
PS_SedToFiPipeStr = "SDR 41"
# Rapid sand filter variables displayed
# General parameters
Q_Fi = 0.02 m^3/s
N_Fi = 2
V_FiLayer = 0.00183333 m/s
V_FiBw = 0.011 m/s
HL_FiTerminal = 0.455621 m
HL_FiBwInitiation = 1.46252 m
HL_FiBwTotalSS = 1.77146 m
HL_FiCleanPath = 0.154167 m
# Filter box
H_Fi = 4.72569 m
L_Fi = 1.43826 m
W_Fi = 1.48323 m
T_FiWall = 0.25 m
N_FiLayer = 6
H_FiLayer = 0.2 m
H_FiBottomLayer = 0.23 m
H_FiSand = 1.27528 m
# Auxiliary boxes
L_FiEntrance = 1.01805 m
W_FiEntrance = 1.00988 m
H_FiEntrance = 1.19638 m
L_FiExit = 0.5183 m
W_FiOverflow = 0.423346 m
L_FiOverflow = 0.918053 m
W_FiInletChannel = 0.398456 m
L_FiInletChannel = 2.74311 m
H_FiInletChannel = 0.547172 m
# Pipe diameters
ND_FiTrunk = 0.1524 m
PS_FiTrunkStr = "SDR 26"
ND_FiBwTrunk = 0.2032 m
PS_FiInletOutletStr = "SDR 41"
PS_FiBwInletStr = "SDR 41"
ND_FiSandOutlet = 0.0508 m
PS_FiSandOutletStr = "SDR 26"
ND_FiSiphonAirValve = 0.01905 m
ND_FiSiphon = 0.2032 m
PS_FiSiphonStr = "SDR 41"
ND_FiTrunkFlushValve = 0.0381 m
ND_FiBwTrunkFlushValve = 0.0508 m
ND_FiExitWaste = 0.1016 m
PS_FiExitWasteStr = "SDR 26"
ND_FiEntOverflow = 0.1524 m
PS_FiEntOverflowStr = "SDR 41"
ND_FiInletChannelDrain = 0.0508 m
ND_FiManBranch = 0.0254 m
ND_FiBwManBranch = 0.0381 m
PS_FiBranchStr = "Sch 40"
ND_FiBranchHolder = 0.0508 m
PS_FiBranchHolderStr = "Sch 40"
ND_FiBypass = 0.2032 m
PS_FiBypassStr = "SDR 41"
# Siphon manifold
B_FiSiphonManOrifices = 0.0667624 m
N_FiSiphonManOrifices = 18
D_FiSiphonManOrifices = 0.0508 m
# Manifolds
N_FiManBranch = 28
B_FiManifoldBranch = 0.1 m
L_FiBwManBranch = 0.597783 m
L_FiManBranch = 0.623183 m
L_FiManBranchExt = 0.02 m
N_FiBwManOrifices = 140
N_FiBwManOrificesPerBranch = 5
D_FiBwManOrifice = 0.0127 m
B_FiBwManOrifice = 0.126946 m
HL_FiBwManOrifice = 0.163372 m
HL_FiBwManOrificeForward = 0.0283632 m
N_FiInletManOrifices = 196
N_FiInletManOrificesPerBranch = 7
D_FiInletManOrifice = 0.015875 m
B_FiInletManOrifice = 0.0888639 m
HL_FiInletManOrificeForward = 0.0237093 m
N_FiTopManOrifices = 140
N_FiTopManOrificesPerBranch = 5
D_FiTopManOrifice = 0.0127 m
B_FiTopManOrifice = 0.133296 m
HL_FiTopManOrificeForward = 0.0283632 m
L_FiOutletBranchSlotted = 0.580008 m
N_FiSlotRows = 2
W_FiManSlots = 0.0002032 m
B_FiManSlot = 0.003175 m
N_FiOutletManSlotsPerRow = 182
N_FiOutletManSlotsPerBranch = 364
L_FiOutletManSlotCurvedInner = 0.0194209 m
# Inlet weirs
Pi_QFiBw = 1.15
H_FiStopGate = 0.2 m
W_FiStopGate = 0.801436 m
W_FiBwFlowControl = 0.0362563 m
H_FiFlowControlSlotTotal = 0.730284 m
H_FiSlotStopper = 0.03 m
N_FiSlotStopper = 3
Q_FiSlotStopperIncrement = 0.00205753 m^3/s
Vol_FiSand = 4604.81 L
## Display AC variables
AC_EntranceTank = [
    "-layer m EtCon";
    "c t 132,132,132";
    "EtCon";
    "  ";
    "_-view o t _zoom w -5.62063,9.46,0.15 -6.85302,10.78,2.68043";
    "_box -5.78063,9.62,0.15 -6.69302,10.62,2.68043 _box -5.63063,9.47,0 -6.84302,10.77,2.68043";
    "_subtract -5.63063,9.47,0  -5.78063,9.62,0.15 ";
    "_-view o t _zoom w -4.87629,9.46,2.10327 -5.79063,10.78,2.68043";
    "_box -5.03629,9.62,2.10327 -5.63063,10.62,2.68043 _box -4.88629,9.47,1.95327 -5.78063,10.77,2.68043";
    "_subtract -4.88629,9.47,1.95327  -5.03629,9.62,2.10327 "
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]
AC_FlocTank =  # no stored result
AC_OperatorAccess = [
    "-layer m OpWalkwayCon"; "c t 132,132,132"; "OpWalkwayCon"; "  "; "_box 0,0,1.08358 -13.06609,12.27,1.28358"; "-group c OpWalkwayCon y "; "all "; "-layer s 0"; "  "; "-layer f OpWalkwayCon"
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]
AC_SedTank =  # no stored result
AC_ChemTanks =  # no stored result
AC_Filter =  # no stored result
AC_SectionCuts = [
    "netload"; "sectioner"; "-view"; "o"; "t"; "laythw"; "-layer"; "n"; "long1,long2,trans1,trans2,trans3"; ""
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]
AC_Cdc =  # no stored result
AI_EtFlocSedFi = [
    "laythw"; "_-view o t"; "-plot y "; "PublishToWeb PNG.pc3"; "User 1 (824.00 x 583.00 Pixels)"; "l n e F"; ""; " ."; "y  [FILEPATH]EtFlocSedFi_t"; "n y"
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]
AI_EtFlocSedFiEt = [
    "-group c * y "; "all "; "-layer s 0"; "  "; "-layer f *"; "  "; "-layer t Et*"; "  "; "-layer s Et*"; "  "
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]
AI_EtFlocSedFiFloc = [
    "-group c * y "; "all "; "-layer s 0"; "  "; "-layer f *"; "  "; "-layer t Floc*"; "  "; "-layer s Floc*"; "  "
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]
AI_EtFlocSedFiSed = [
    "-group c * y "; "all "; "-layer s 0"; "  "; "-layer f *"; "  "; "-layer t Sed*"; "  "; "-layer s Sed*"; "  "
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]
AI_EtFlocSedFiFilter = [
    "-group c * y "; "all "; "-layer s 0"; "  "; "-layer f *"; "  "; "-layer t Fi*"; "  "; "-layer s Fi*"; "  "
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]
AI_EtFlocSedFiOp = [
    "-group c * y "; "all "; "-layer s 0"; "  "; "-layer f *"; "  "; "-layer t Op*"; "  "; "-layer s Op*"; "  "
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]
AI_EtFlocSedFiIsoX = ["shademode x"; "-group c * y "; "all "; "-layer s 0"; "  "; "-layer f *"; "  "; "-layer t *"; "  "; "-layer s *"; "  "; " "; "_-view se"; "-plot y "; "PublishToWeb PNG.pc3"; "User 1 (824.00 x 583.00 Pixels)"; "l n e F"; ""; " ."; "y  [FILEPATH]EtFlocSedFiFull_se"; "n y"]
AI_EtFlocSedFiCdc = [
    "-group c * y "; "all "; "-layer s 0"; "  "; "-layer f *"; "  "; "-layer t Cdc*"; "  "; "-layer s Cdc*"; "  "
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]
# Added 2/5/16 by mrf222
AC_Final =  # error
