# AguaClara Design Tool
Q_Plant := 200*L/s
method := "EtFlocSedFi"
## References
# MathCAD dimension calculations:
# [reference: ExpertInputs.xmcd]
# [reference: MathFunctions.xmcd]
# [reference: PipeDatabase.xmcd]
# [reference: FluidsFunctions.xmcd]
# [reference: SedimentationTank.xmcd]
Z_FlocBafflesMin := Z_SedWeirExit
W_FlocChannelOpening := W_SedInletChannelPreWeir
# [reference: FlocculatorMod.xmcd]
# [reference: LFOM.xmcd]
L_EtMax := L_Sed  # maximum length to prevent enlarging the plant footprint
HW_EtExit := HW_Sed + HL_Floc
Z_EtExit := Z_SedWeirExit
# [reference: EntranceTankMod.xmcd]
Z_FiWaterSource := Z_SedWeirExit
HL_FiEntranceWater := HL_FiEntrancePipe
Z_FiSourceBottom := Z_SedChannelBottom
# [reference: StackedRapidSandFilter.xmcd]
# [reference: LinearCdc.xmcd]
# [reference: ChemStorageTanks.xmcd]
# AutoCAD drawing programs:
# Translators:
# These are the codes that take MathCAD outputs and create AutoCAD scripts that are used to draw the plant (formerly Basics)
# [reference: MtoATranslators.xmcd]
# The wrapped MtoA translator contains the functions that the user will want to access. These functions will draw pieces with full functionality - specifying the location, dimension, and orientation of the object. Also, it contains layer control and subtraction capabilities for grouped objects.
# [reference: MtoATranslatorsWrapped.xmcd]
# Drawing functions:
# [reference: ChannelF.xmcd]
# [reference: PlumbingF.xmcd]
# [reference: TankF.xmcd]
# [reference: StairsF.xmcd]
# [reference: DrainChannelF.xmcd]
# AutoCAD Script Files:
Floc_Origin := [Plant_Origin[0]; Plant_Origin[1] + N_SedTanks*(W_Sed + T_PlantWall); Plant_Origin[2] + Z_FlocTank]
Z_FlocChannelBottom := Z_SedChannelBottom
# [reference: FlocculatorACMod.xmcd]
# [reference: SedimentationTankAC.xmcd]
# [reference: EntranceTankACher28.xmcd]
LFOM_Origin := [RMElbow_Origin[0]; RMElbow_Origin[1] + ElbowRadius(ND_RMPipe); ZW_Et - HL_Flowmeasure]
L_RMVertPipeTop := H_PlantFreeboard
L_LfomPipe := HL_Lfom
L_RMVertPipeBottom := (Z_EtTop - (RMElbow_Origin[2] + ElbowRadius(ND_RMPipe)) - HL_Lfom - H_PlantFreeboard)
# [reference: LfomAC.xmcd]
# [reference: ChemStockTanksAC.xmcd]
Fi_origin := [
    Plant_Origin[0] - W_FiInletChannel - 5*T_PlantWall - T_FiWall - L_FiEntrance - L_FiExit - W_MpWalkway - L_Sed - W_PlantDC;
    Plant_Origin[1] + N_SedTanks*(W_Sed + T_PlantWall) - T_PlantWall - W_Fi/2 - ConRadius(ND_FiBwTrunk) - S_Fitting;
    Z_FiBottom
]
# [reference: StackedRapidSandFilterAC.xmcd]
# [reference: CdcAC.xmcd]
# [reference: OperatorAccessAC.xmcd]
# [reference: MaterialsAC.xmcd]
# Materials List:
# [reference: MaterialsList.xmcd]
# Layouts:
# This file will execute at the very end to create multiple views of the entire plant in paperspace
# [reference: LayoutsAC.xmcd]
## All variables displayed must have the standard SI units. They may not have units attached by the user.
# General
Q_Plant = 0.2 m^3/s
Pi_VenaContractaOrifice = 0.62
T_PlantWall = 0.15 m
W_SedPlate = 1.0668 m
T_ConcreteMin = 0.05 m
L_SedPlateSheet = 3 m
C_CoagStock = 200 kg/m^3
T_SedPlate = 0.002 m
Ti_CoagStock = 108000 s
T_SedWeir = 0.04 m
C_ChlorStock = 44.4444 kg/m^3
W_SedBay = 1.0668 m
Ti_ChlorineStock = 108000 s
HL_ChannelMax = 0.05 m  # Eliminate FCM variable from design specs
H_PlantFreeboard = 0.1 m
EN_DrillSeries = 0
W_HumanMin = 0.54 m
W_ChannelMin = 0.15 m
# Entrance Tank
# Tank
HW_Et = 1.08776 m
HW_EtMax = 1.5 m
H_Et = 1.18776 m
Z_EtTop = 2.78361 m
L_Et = 10.8372 m
Z_Et = 1.59585 m
ZW_Et = 2.68361 m
H_EtOverflowChannel =  # error: This variable is undefined.
W_Et = 2.56467 m
H_EtTop = 0.3 m  # height of the top part of the entrance tank above the hoppers
# Hoppers
H_EtLastSlope =  # error
H_EtHopperBack = 0.88776 m
N_EtFullHopper = 4
H_EtHopper = 0.88776 m
Z_EtHopper = 2.48361 m  # elevation of top of slab.
T_EtHopperLedge = 0.15 m
L_EtHopper = 1.97712 m
AN_EtSlope = 0.785398
# Rapid Mix
# Drain Channel
ED_Tee = 0.326512 m^2/s^3
ND_RMPipe = 0.6096 m
W_EtDC = 1.66885 m  # drain channel under entrance tank dimensions
# Drains
L_EtDC = 10.1032 m
ND_EtDrain = 0.0762 m
H_EtDC = 1.44585 m  # Give heights of the channel at the beginning and end and change the design specs to explain that it's sloped.
L_EtDrainStopper = 1.18376 m
# Flow measurement
ND_Lfom =  # error
HL_Flowmeasure = 0.2 m
Z_LfomOrifices = 2.50584 m  # elevation of the center of
HL_Lfom = 0.2 m
D_LfomOrifices = 0.04445 m
B_LfomRows = 0.05 m
N_LfomOrifices = [38; 38; 38; 38]
H_LfomOrifices = [0.022225; 0.072225; 0.122225; 0.172225] m
Q_LfomScale =  # error
# Trash Rack
B_EtRebar = 0.0433795 m
# Flow Control Valve | Other Parameters
# Overflow Weir
ND_EtFlowControl = 0.508 m
V_EtUp = 0.008 m/s
W_EtOverflowSlot = 0.210083 m
Ti_Et = 163.791 s
ND_EtOverflowDrain = 0.381 m
H_EtOverflowCutaway = 0.0350139 m
L_EtOverflowWeir = 2.14824 m
W_DC =  # error
# Maybe give the vertical distances below the bottom of the sed tank of the beginning and end of the channel? Calculate them, display, and add to the design specs.
H_DC =  # error
L_DC =  # error
H_HumanAccess = 1.5 m
# Plant Drain Channel
# Coag Dose Controller
# Coagulant | Chlorine
Z_CoagTank = 3.05131 m
C_CoagStockMax = 200 kg/m^3
C_ChlorineStockMax = 50 kg/m^3
Z_CoagTankOutlet = 3.15131 m
C_CoagDoseMax = 0.08 kg/m^3
C_ChlorineDoseMax = 0.002 kg/m^3
L_CdcFloatArm = 0.41275 m
N_CoagCdcTubes = 32
N_ChlorCdcTubes = 5
L_CdcScaleArm = 0.50165 m
L_CoagCdcTube = 2.84232 m
L_ChlorCdcTube = 3.03096 m
B_StockOutlet = 0.1 m
HL_CoagCdc = 0.2 m
HL_ChlorCdc = 0.1 m
Ti_CoagStock = 108000 s
Vol_CoagTank = 2500 L
Vol_ChlorineTank = 1100 L
H_CoagTankAboveHeadTank = 0.3 m
D_CdcCoag = 0.00396875 m
K_CdcTube = 8
D_CdcChlor = 0.00396875 m
ND_EtFloat = 0.2032 m
Q_CoagStock = 8e-5 m^3/s
Q_ChlorStock = 9e-6 m^3/s
ND_CoagPiping = 0.0127 m
# Flocculator
# Tank
EN_FlocType :=
    "horizontal" if EN_FlocHoriz == 1
    "vertical" otherwise
EN_FlocType = "horizontal"
H_Floc = 2.1796 m
HW_FlocEnd = 1.93934 m
HW_FlocStart = 2.0796 m
Z_FlocTank = 0 m
L_FlocTank =  # error
H_FlocPort = [2.1796; 2.1796; 2.1796; 2.1796] m
W_FlocChannel = 2.08551 m
N_FlocChannels = 4
# Drains
ND_FlocValve = 0.2032 m
N_FlocValves = 2
H_FlocSlope = 0.109537 m
Ti_FlocDrain = 1800 s
# Parameters
ED_Floc = 0.0105 m^2/s^3
CP_Floc = 75 m^(2/3)
Ti_Floc = 818.191 s
G_Floc = 41.0013 1/s  # Look at Flocculator Positioning arrays
V_Floc = 0.143172 m/s
# Fill last channel with bafffles from last channel
ED_FlocMax = 0.0124463 m^2/s^3  # Fix port width to be based on energy dissipation in that channel
# Adjust spacing after the number of baffles per channel is known.
ED_FlocAve = 0.00168111 m^2/s^3  # Check the residence time of the flocculator should be at least 20minutes
ED_FlocChannelFirst =  # error
HL_Floc = 0.140259 m
K_FlocBaffle = 2.5
CP_Floc = 75 m^(2/3)
# Baffles
S_FlocBaffle = [0.695169; 0.695169; 0.695169; 0.695169] m
B_FlocBaffle = [0.845169; 0.845169; 0.845169; 0.845169] m
N_FlocChannelBaffles = [12; 12; 12; 10]
W_FlocPort = [0.695169; 0.695169; 0.695169; 0.854038] m
L_FlocBaffleLower = 1.39034 m
L_FlocBaffleUpper = 1.39034 m
T_FlocBaffle = 0.15 m
S_FlocBaffleFirst = 0.695169 m
EN_FlocBaffle = 0
Z_FlocBaffles = [
    0, 0, 0, 0;
    0, 0, 0, 0;
    0, 0, 0, 0;
    0, 0, 0, 0;
    0, 0, 0, 0;
    0, 0, 0, 0;
    0, 0, 0, 0;
    0, 0, 0, 0;
    0, 0, 0, 0;
    0, 0, 0, 0;
    0, 0, 0, 0;
    0, 0, 0, 0
] m
# Last Channel
# Modules | First Channel
N_FlocChannelModulesLongLast = 2
ND_FlocModulesMain = 0.0127 m
N_FlocChannelModulesLongFirst = 3
N_FlocChannelBafflesShortLast = 2
ND_FlocModulesLarge = 0.0381 m
N_FlocChannelBafflesShortFirst = 0
L_FlocModuleLongOuterLast = 1.68966 m
L_FlocModuleLongOuterFirst = 1.68966 m
ND_SpacerPipe = 0.01905 m
L_FlocModuleLongFirst = 2.53482 m
L_FlocModuleLongLast = 2.53482 m
# Sed Tanks
# Tanks
N_SedTanks = 11
Q_SedBay = 0.00909091 m^3/s
W_Sed = 2.1336 m  # Total tank wall height
HW_Sed = 1.93934 m
L_Sed = 10.8372 m
L_Sed = 10.8372 m  # Total tank length
N_SedBays = 2
H_Sed = 2.03934 m
W_SedSideSlopes = 0.52505 m
L_SedActive = 8.41546 m
AN_SedSlope = 0.872665
# Floc Hopper
AN_SedHopperSlope = 0.785398
# Parameters
V_SedUpBod = 0.001 m/s  # design constraints
V_SedCBod = 0.00012 m/s
V_SedUp = 0.000983045 m/s  # Actual values from this design
Ti_Sed = 1768.85 s
# sludge drain
N_SedSludgeOrifices = 77  # per cell
Ti_SludgeDrain = 1800 s  # Tank Drain time
W_SedSludge = 0.122274 m  # Width of the sludge channel
H_SedSludge = 0.122274 m  # Depth of the sludge channel
# Distance center to center between drain orifices
B_SedSludgeOrifices = 0.112294 m
W_SedDrainCover = 0.162274 m
D_SedSludgeOrifice = 0.00959838 m  # Diameter of drain orifices
N_SedSludgeOrifices = 77
ND_SedSludgePipe = 0.1524 m
Z_SedSludge = 0.122274 m  # Height from 0 of the top of the sludge drain
Z_SedSideSlopes = 0.814704 m
# inlet channel | exit channel
W_SedExitChannel = 0.670988 m
HW_SedInletChannel = 0.85329 m
H_SedExitChannel = 0.95329 m
W_SedInletChannel = 1.20757 m
EN_InletChannelGeom = 1
HW_SedExitChannel = 0.81329 m
# water height in exit channel from base of channel
L_SedChannel = 24.9696 m
H_SedWeirExit = 0.786538 m
H_SedInletChannel = 0.95329 m
Z_SedChannelBottom = 1.08605 m
W_SedInletChannelPreWeir = 0.854038 m
HL_SedWeirInlet = 0.0267523 m
H_SedWeirInlet = 0.826538 m
W_SedWeirInlet = 24.9696 m
# launder
N_SedLaunderOrifices = 84  # Number of orifices per launder
ND_SedLaunder = 0.2032 m
N_SedLaunderOrificesRow =  # error  # Number of orifices per row
D_SedLaunderOrifice = 0.015875 m
Z_SedLaunder = 1.75432 m
L_SedLaunder = 8.70036 m
Q_SedLaunderOrifices = 0.000108225 m^3/s
HL_SedLaunderOrifice = 0.039654 m
B_SedLaunderOrifices = 0.1 m  # Center to center launder spacing
# inlet manifold
ND_SedManifold = 0.254 m
L_SedManifoldDiffuser = 0.157882 m
Z_SedManifoldPipe = 0.472256 m
ND_SedDiffuser = 0.0254 m
D_SedManifoldPort = 0.03175 m
B_SedManifoldPort = 0.05 m
N_SedManifoldPorts = 171
L_SedManifoldPipe = 9.56938 m
ED_SedInlet = 0.0105 m^2/s^3
Q_SedManifoldPort = 5.31632e-5 m^3/s
# plate settlers
S_SedPlateMin = 0.025 m
L_SedPlate = 0.6 m
B_SedPlate = 0.027 m  # center to center distance between lamella
S_SedPlate = 0.025 m  # spacing between lamella
N_SedPlates = 270  # Number of Sed Plates per Sedimentation Tank Bay.
N_SedModules = 30  # Number of modules per bay
N_SedModulePlates = 9  # Number of plates per module
AN_SedPlate = 1.0472
# SRSF
# tank
Porosity_Sand := ε_FiSand
T_FiWall = 0.25 m
N_FiLayer = 6
Q_Fi = 0.0285714 m^3/s
Z_FiBottom = -3.42504 m
HL_FiTerminal = 0.455621 m
H_FiLayer = 0.2 m
H_Fi = 5.26199 m
D_FiSand60 = 0.000825 m
HL_FiBwInitiation = 1.50762 m
Z_FiTop = 1.83696 m
V_FiLayer = 0.00183333 m/s
L_Fi = 1.38239 m
N_Fi = 7
HL_FiBwSS = 1.30762 m
Porosity_Sand = 0.4
W_Fi = 2.20277 m
H_FiBottomLayer = 0.28 m
V_FiBw = 0.011 m/s
H_FiSand = 1.32083 m
# sand drain
# trunk lines
Ti_FiSand = 1422.69 s  # This is the time required to empty the filter of the sand.
ND_FiTrunk = 0.1524 m
ND_FiBwTrunk = 0.3048 m
ND_FiSandOutlet = 0.0508 m
# siphon
ND_FiSiphonAirValve = 0.0381 m
Z_FiSiphonCoupling = 0.759267 m
ND_FiSiphon = 0.3048 m
Z_FiSiphonInlet = -1.50796 m
B_FiSiphonManOrifices = 0.102997 m
N_FiSiphonManOrifices = 10
D_FiSiphonManOrifices = 0.0508 m
# Waste and drain pipes
ND_FiExitWaste = 0.1524 m
ND_FiBwWeirDrain =  # error
ND_FiBwDrain =  # error
# branches
N_FiSlotRows = 2
B_FiManifoldBranch = 0.1 m
ND_FiManBranch = 0.0254 m
ND_FiBwManBranch = 0.0381 m
B_FiManSlot = 0.0047625 m
B_FiBwManSlot = 0.0047625 m
# Inlet Channel
HL_FiWeir =  # error
L_FiWeir =  # error
Z_FiEntranceWeir = 1.68696 m
# Entrance Box
Z_FiEntranceBottom = 0.339433 m  # bottom of the entrance box
# Exit Box
Z_FiExitBottom = 0.339433 m  # bottom of the filtered water box
Z_FiExitWeir =  # error
N_Launders =  # error
L_LaunderPipeTotal =  # error
N_LaunderCouplings =  # error
N_ValveCouplings = 22
N_SedPlatesTotal = 5940
N_SedPlatesPerSheet = 5
N_SedPlateSheets = 1188
N_Valves = 22
A_EtFloor = 31.9044 m^2
W_FlocWithWalls = 8.94203 m
L_FlocWithWalls = 11.1372 m
Vol_FlocFloor = 15189 L
A_FlocFloor = 101.26 m^2
Vol_SedSlopes =  # error
A_SedWalls =  # error
A_SedFloor = 281.433 m^2
# Materials List
# Plant Summary Calculations:
HL_PlantTotal := Z_EtTop - H_PlantFreeboard - Z_FiExitWeir
HL_PlantTotal =  # error
## Display AC variables
AC_EntranceTank =  # no stored result
AC_FlocTank = [
    "-layer m FlocTankCon"; "c t 132,132,132"; "FlocTankCon"; "  "; "_-view o t _zoom w 0.16,24.9596,0 -10.9972,34.07163,2.1796"; "_box 0,25.1196,0 -10.8372,33.91163,2.1796 _box 0.15,24.9696,-0.15 -10.9872,34.06163,2.1796"; "_subtract 0.15,24.9696,-0.15  0,25.1196,0 "; "_box -10.9872,27.20511,0 0.15,27.35511,2.1796"; "-array l  R 3 1 2.23551"; "-group c FlocTankCon y "
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]
AC_OperatorAccess = [
    "-layer m OpWalkwayCon"; "c t 132,132,132"; "OpWalkwayCon"; "  "; "_box 0.15,-0.15,0.88605 -19.55807,39.33023,1.08605"; "-group c OpWalkwayCon y "; "all "; "-layer s 0"; "  "; "-layer f OpWalkwayCon"
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]
AC_SedTank =  # no stored result
AC_ChemTanks =  # no stored result
AC_Filter =  # no stored result
AC_ZZLayout := AC_Layout
AC_Cdc = [
    "-layer m Cdc";
    "c t 125,0,160";
    "Cdc";
    "  ";
    "-insert https://confluence.cornell.edu/download/attachments/173604905/CdcLeverArm.dwg";
    "-10.56655,36.78383,2.80851 x 1 1  270";
    "-insert https://confluence.cornell.edu/download/attachments/173604905/CdcLeverArmBracket.dwg";
    "-10.9793,36.75183,2.78361 x 1 1  270";
    "-insert https://confluence.cornell.edu/download/attachments/173604905/CdcCht.dwg";
    "-11.91265,36.78383,2.90131 x 1 1  90"
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]
AC_MatApply = [
    "-insert https://confluence.cornell.edu/download/attachments/173604905/CdcLeverArm.dwg"; "0,0,0 x 1 1  0"; "-layer"; "material"; "Flat - Polished Gray"; "*con"; "  "; "-layer"; "material"; "PVC - White"
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]
AC_ZZLayout =  # error
AI_EtFlocSedFi = [
    "laythw"; "_-view o t"; "-plot y "; "PublishToWeb PNG.pc3"; "User 1 (824.00 x 583.00 Pixels)"; "l n e F"; ""; " ."; "y  [FILEPATH]EtFlocSedFi_t"; "n y"
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]
Q_Plant = 0.2 m^3/s
# [component: inputs stack(AC_EntranceTank, AC_LFOM)]
