Q_Plant := □
Q_Plant := 40*L/s
HL_FlocMax := □
HL_FlocMax := 40 cm
H_SedSlopesToFlocWeirMin := □
H_SedSlopesToFlocWeirMin := 25 cm
T_FlocSlab := □
T_FlocSlab := 15 cm
T_SedWall := □
T_SedWall := 15 cm
T_SedDividingWall := □
T_SedDividingWall := 15 cm
T_SedChannelWall := □
T_SedChannelWall := 15 cm
T_FlocWall := □
T_FlocWall := 15 cm
T_FlocDividingWall := □
T_FlocDividingWall := 15 cm
T_FiWall := □
T_FiWall := 25 cm
T_FiBoxWall := □
T_FiBoxWall := 15 cm
T_PlantWall := □
T_PlantWall := 15 cm
T_PlantFloor := □
T_PlantFloor := 20 cm
T_ChemSlab := □
T_ChemSlab := 15 cm
T_DrainChannelWall := □
T_DrainChannelWall := 15 cm
C_CoagDoseMax := □
C_CoagDoseMax := 40*mg/L
C_ChlorDoseAve := □
C_ChlorDoseAve := 1*mg/L
