# AguaClara Design Tool
Q_Plant := □  # error: This placeholder is empty.
method := "EtFlocSedFiHigh"
## References
# MathCAD dimension calculations:
# [reference: ExpertInputs.xmcd]
# [reference: MathFunctions.xmcd]
# [reference: PipeDatabase.xmcd]
# [reference: MaterialsDatabase.xmcd]
# [reference: FluidsFunctions.xmcd]
# [reference: SedTankFunctions.xmcd]
# [reference: CdcFunctions.xmcd]
# [reference: SedimentationTank85Lps.xmcd]
# [reference: Flocculator.xmcd]
# [reference: LFOMvlk24.xmcd]
# [reference: EntranceTankvlk24.xmcd]
# [reference: StackedRapidSandFilter.xmcd]
# [reference: LinearCdc.xmcd]
# [reference: ChemStorageTanks.xmcd]
# AutoCAD drawing programs:
# Translators:
# These are the codes that take MathCAD outputs and create AutoCAD scripts that are used to draw the plant (formerly Basics)
# [reference: MtoATranslators.xmcd]
# The wrapped MtoA translator contains the functions that the user will want to access. These functions will draw pieces with full functionality - specifying the location, dimension, and orientation of the object. Also, it contains layer control and subtraction capabilities for grouped objects.
# [reference: MtoATranslatorsWrapped.xmcd]
# Drawing functions:
# [reference: ChannelF.xmcd]
# [reference: PlumbingF.xmcd]
# [reference: TankF.xmcd]
# [reference: StairsF.xmcd]
# [reference: DrainChannelF.xmcd]
# AutoCAD Script Files:
# [reference: FlocculatorAC85Lps.xmcd]
# [reference: SedimentationTankAC85Lps.xmcd]
# [reference: EntranceTankAC85Lps.xmcd]
# [reference: ChemStockTanksAC.xmcd]
# [reference: StackedRapidSandFilterAC85Lps.xmcd]
# [reference: CdcAC.xmcd]
# [reference: OperatorAccessAC.xmcd]
# [reference: MaterialsAC.xmcd]
# Materials List:
# [reference: MaterialsList.xmcd]
# Layouts:
# This file will execute at the very end to create multiple views of the entire plant in paperspace
# [reference: LayoutsAC.xmcd]
## All variables displayed must have the standard SI units. They may not have units attached by the user.
# General
Q_Plant = 0.085 m^3/s
Pi_VenaContractaOrifice = 0.63
T_PlantWall = 0.25 m
W_SedPlate = 1.0668 m
T_ConcreteMin = 0.05 m
L_SedPlateSheet = 3 m
C_CoagStock = 200 kg/m^3
T_SedPlate = 0.002 m
Ti_CoagStock = 108000 s
T_SedWeir = 0.04 m
C_ChlorineStock = 15 kg/m^3
W_SedBay = 1.0668 m
Ti_ChlorineStock = 108000 s
HL_ChannelMax = 0.05 m  # Eliminate FCM variable from design specs
H_PlantFreeboard = 0.1 m
EN_DrillSeries = 0
W_HumanMin = 0.45 m
W_ChannelMin = 0.15 m
# Entrance Tank
# Tank
HW_Et = 1.14382 m
HW_EtMax = 1.5 m
H_Et = 1.24382 m
Z_EtTop = 2.85329 m
L_Et = 6.61055 m
Z_Et = 1.60947 m
ZW_Et = 2.75329 m
W_Et = 3.75102 m
H_EtTop = 0.5 m  # height of the top part of the entrance tank above the hoppers
# Hoppers
H_EtHopperBack = 0.743825 m
N_EtFullHopper = 2
H_EtHopper = 0.743825 m
Z_EtHopper = 2.35329 m  # elevation of top of slab.
T_EtHopperLedge = 0.15 m
L_EtHopper = 1.68925 m
AN_EtSlope = 0.785398
# Rapid Mix
# Drain Channel
ED_Tee =  # error: This variable is undefined.
ND_RMPipe = 0.508 m
W_EtDC = 0.64784 m  # drain channel under entrance tank dimensions
# Drains
L_EtDC = 5.97239 m
ND_EtDrain = 0.0762 m
H_EtDC = 0.538162 m  # Give heights of the channel at the beginning and end and change the design specs to explain that it's sloped.
L_EtDrainStopper = 1.23982 m
# Flow measurement
ND_LfomPipe = 0.508 m
HL_Flowmeasure = 0.4 m
Z_LfomOrifices = 2.37552 m  # elevation of the center of
HL_Lfom = 0.4 m
D_LfomOrifices = 0.04445 m
B_LfomRows = 0.05 m
N_LfomOrifices = [15; 5; 4; 4; 3; 3; 3; 2]
H_LfomOrifices = [0.022225; 0.072225; 0.122225; 0.172225; 0.222225; 0.272225; 0.322225; 0.372225] m
# Trash Rack
B_EtRebar = 0.0435531 m
# Flow Control Valve | Other Parameters
# Overflow Weir
ND_EtFlowControl = 0.381 m
V_EtUp = 0.008 m/s
W_EtOverflowSlot = 0.210083 m
Ti_Et = 182.748 s
ND_EtOverflowDrain = 0.381 m
H_EtOverflowCutaway = 0.0350139 m
L_EtOverflowWeir = 1.89085 m
W_PlantDC = 1 m
# Maybe give the vertical distances below the bottom of the sed tank of the beginning and end of the channel? Calculate them, display, and add to the design specs.
H_PlantDC = 0.743008 m
L_PlantDC = 28.9133 m
H_HumanAccess = 1.5 m
# Plant Drain Channel
# Coag Dose Controller
# Coagulant | Chlorine
Z_CoagTank = 3.12099 m
C_CoagStockMax = 200 kg/m^3
C_ChlorineStockMax = 15 kg/m^3
Z_CoagTankOutlet = 3.22099 m
C_CoagDoseMax = 0.08 kg/m^3
C_ChlorineDoseMax = 0.002 kg/m^3
L_CdcFloatArm = 0.6604 m
N_CdcCoagTubes = 3
N_CdcChlorineTubes = 3
L_CdcScaleArm = 0.254 m
L_CdcCoagTube = 5.17891 m
L_CdcChlorineTube = 3.12735 m
B_StockOutlet = 0.1 m
HL_CdcCoag = 0.1 m
HL_CdcChlorine = 0.1 m
Ti_CoagStock = 108000 s
Vol_CoagTank = 2500 L
Vol_ChlorineTank = 2500 L
H_CoagTankAboveHeadTank = 0.3 m
D_CdcCoag = 0.0079375 m
K_CdcTube = 2
D_CdcChlorine = 0.0047625 m
ND_EtFloat = 0.2032 m
Q_CoagStock = 3.4e-5 m^3/s
Q_ChlorineStock = 1.13333e-5 m^3/s
ND_CoagPiping = 0.0127 m
# Flocculator
# Tank
EN_FlocType :=
    "horizontal" if EN_FlocHoriz == 1
    "vertical" otherwise
EN_FlocType = "vertical"
H_Floc = 2.0833 m
HW_FlocEnd = 1.85898 m
HW_FlocStart = 1.9833 m
Z_FlocTank = 0 m
L_Floc = 6.61055 m
H_FlocPort = [0.801275; 0.801275; 0.801275; 0.801275; 0.801275; 0.801275] m
W_FlocChannel = 0.715583 m
N_FlocChannels = 6
# Drains
ND_FlocValve = 0.1016 m
N_FlocValves = 3
H_FlocSlope = 0.05715 m
Ti_FlocDrain = 1800 s
# Parameters
ED_Floc = 0.0105 m^2/s^3
CP_Floc = 75 m^(2/3)
Ti_Floc = 641.49 s
G_Floc = 41.9321 1/s  # Look at Flocculator Positioning arrays
V_Floc = 0.144056 m/s
# Fill last channel with bafffles from last channel
ED_FlocMax = 0.010299 m^2/s^3  # Fix port width to be based on energy dissipation in that channel
# Adjust spacing after the number of baffles per channel is known.
ED_FlocAve = 0.00190056 m^2/s^3  # Check the residence time of the flocculator should be at least 20minutes
HL_Floc = 0.124323 m
K_FlocBaffle = 2.5
CP_Floc = 75 m^(2/3)
# Baffles
S_FlocBaffle = [0.824568; 0.824568; 0.824568; 0.824568; 0.824568; 0.824568] m
B_FlocBaffle = [0.826568; 0.826568; 0.826568; 0.826568; 0.826568; 0.826568] m
N_FlocChannelBaffles = [7; 7; 7; 7; 7; 6]
W_FlocPort = [0.804568; 0.804568; 0.804568; 0.804568; 0.804568; 0.586538] m
L_FlocBaffleLower = 0.958066 m
L_FlocBaffleUpper = 1.13239 m
T_FlocBaffle = 0.002 m
S_FlocBaffleFirst = 0.824568 m
EN_FlocBaffle = 1
Z_FlocBaffles = [
    0, 0, 0, 0, 0, 0.900916;
    0.900916, 0.900916, 0.900916, 0.900916, 0.900916, 0;
    0, 0, 0, 0, 0, 0.900916;
    0.900916, 0.900916, 0.900916, 0.900916, 0.900916, 0;
    0, 0, 0, 0, 0, 0.900916;
    0.900916, 0.900916, 0.900916, 0.900916, 0.900916, 0;
    0, 0, 0, 0, 0, 0
] m
# Modules
ND_FlocModulesMain = 0.0127 m
ND_FlocModulesLarge = 0.0381 m
L_FlocModuleLong = [2.47902; 2.47902; 2.47902; 2.47902; 2.47902; 2.47902] m
L_FlocModuleShort = [1.65245; 1.65245; 1.65245; 1.65245; 1.65245; 0.825886] m
ND_SpacerPipe = 0.01905 m
L_FlocModuleLongOuter = [1.65245; 1.65245; 1.65245; 1.65245; 1.65245; 1.65245] m
# Sed Tanks
# Tanks
N_SedTanks = 8
Q_SedBay = 0.0053125 m^3/s
W_Sed = 2.1336 m  # Total tank wall height
HW_Sed = 1.85898 m
L_Sed = 6.61055 m
L_Sed = 6.61055 m  # Total tank length
N_SedBays = 2
H_Sed = 1.95898 m
W_SedSideSlopes = 0.511175 m
L_SedActive = 4.86129 m
AN_SedSlope = 0.872665
# Floc Hopper
AN_SedHopperSlope = 0.785398
# Parameters
V_SedUpBod = 0.001 m/s  # design constraints
V_SedCBod = 0.00012 m/s
V_SedUp = 0.00099695 m/s  # Actual values from this design
Ti_Sed = 1821.85 s
# sludge drain
N_SedSludgeOrifices = 48  # per cell
Ti_SludgeDrain = 1800 s  # Tank Drain time
W_SedSludge = 0.0913791 m  # Width of the sludge channel
H_SedSludge = 0.0913791 m  # Depth of the sludge channel
# Distance center to center between drain orifices
B_SedSludgeOrifices = 0.103814 m
W_SedDrainCover = 0.131379 m
D_SedSludgeOrifice = 0.00923435 m  # Diameter of drain orifices
N_SedSludgeOrifices = 48
ND_SedSludgePipe = 0.1016 m
Z_SedSludge = 0.0913791 m  # Height from 0 of the top of the sludge drain
Z_SedSideSlopes = 0.795024 m
# inlet channel | exit channel
W_SedExitChannel = 0.4916 m
HW_SedInletChannel = 0.586611 m
H_SedExitChannel = 0.686611 m
W_SedInletChannel = 0.833868 m
EN_InletChannelGeom = 1
HW_SedExitChannel = 0.546611 m
# water height in exit channel from base of channel
L_SedChannel = 18.2188 m
H_SedWeirExit = 0.52815 m
H_SedInletChannel = 0.686611 m
Z_SedChannelBottom = 1.27237 m
W_SedInletChannelPreWeir = 0.586538 m
HL_SedWeirInlet = 0.0184608 m
H_SedWeirInlet = 0.56815 m
W_SedWeirInlet = 18.2188 m
# launder
N_SedLaunderOrifices = 49  # Number of orifices per launder
ND_SedLaunder = 0.1524 m
D_SedLaunderOrifice = 0.015875 m
Z_SedLaunder = 1.70845 m
L_SedLaunder = 5.07839 m
Q_SedLaunderOrifices = 0.000108418 m^3/s
HL_SedLaunderOrifice = 0.0385424 m
B_SedLaunderOrifices = 0.1 m  # Center to center launder spacing
# inlet manifold
ND_SedManifold = 0.2032 m
L_SedManifoldDiffuser = 0.156624 m
Z_SedManifoldPipe = 0.44305 m
ND_SedDiffuser = 0.0254 m
D_SedManifoldPort = 0.03175 m
B_SedManifoldPort = 0.05 m
N_SedManifoldPorts = 98
L_SedManifoldPipe = 5.36296 m
ED_SedInlet = 0.0105 m^2/s^3
Q_SedManifoldPort = 5.42092e-5 m^3/s
# plate settlers
S_SedPlateMin = 0.025 m
L_SedPlate = 0.6 m
B_SedPlate = 0.027 m  # center to center distance between lamella
S_SedPlate = 0.025 m  # spacing between lamella
N_SedPlates = 156  # Number of Sed Plates per Sedimentation Tank Bay.
N_SedModules = 13  # Number of modules per bay
N_SedModulePlates = 12  # Number of plates per module
AN_SedPlate = 1.0472
# SRSF
# tank
Porosity_Sand := ε_FiSand
T_FiWall = 0.25 m
N_FiLayer = 6
Q_Fi = 0.0283333 m^3/s
Z_FiBottom = -3.23711 m
HL_FiTerminal = 0.455621 m
H_FiLayer = 0.2 m
H_Fi = 5.0265 m
D_FiSand60 = 0.000825 m
HL_FiBwInitiation = 1.50762 m
Z_FiTop = 1.78939 m
V_FiLayer = 0.00183333 m/s
L_Fi = 1.48239 m
N_Fi = 3
HL_FiBwSS = 1.30762 m
Porosity_Sand = 0.4
W_Fi = 2.06142 m
H_FiBottomLayer = 0.28 m
V_FiBw = 0.011 m/s
H_FiSand = 1.32083 m
# sand drain
# trunk lines
Ti_FiSand = 1427.7 s  # This is the time required to empty the filter of the sand.
ND_FiTrunk = 0.1524 m
ND_FiBwTrunk = 0.3048 m
ND_FiSandOutlet = 0.0508 m
# siphon
ND_FiSiphonAirValve = 0.0381 m
Z_FiSiphonCoupling = 0.658808 m
ND_FiSiphon = 0.3048 m
Z_FiSiphonInlet = -1.32003 m
B_FiSiphonManOrifices = 0.112997 m
N_FiSiphonManOrifices = 10
D_FiSiphonManOrifices = 0.0508 m
# Waste and drain pipes
ND_FiExitWaste = 0.1524 m
# branches
N_FiSlotRows = 2
B_FiManifoldBranch = 0.1 m
ND_FiManBranch = 0.0254 m
ND_FiBwManBranch = 0.0381 m
B_FiManSlot = 0.0047625 m
B_FiBwManSlot = 0.0047625 m
# Inlet Channel
HL_FiInletChannel = 0.00100507 m
L_FiInletChannel = 5.98528 m
Z_FiEntranceWeir = 1.63939 m
# Entrance Box
Z_FiEntranceBottom = 0.485302 m  # bottom of the entrance box
# Exit Box
Z_FiExitBottom = 0.485302 m  # bottom of the filtered water box
L_FiExit = 0.5183 m
L_SedLaunder = 5.07839 m
N_ValveCouplings = 16
N_SedPlatesTotal = 2496
N_SedPlatesPerSheet = 5
N_SedPlateSheets = 500
N_Valves = 16
A_EtFloor = 30.2271 m^2
W_FlocWithWalls = 5.7935 m
L_FlocWithWalls = 7.11055 m
Vol_FlocFloor = 10743.1 L
A_FlocFloor = 42.9726 m^2
A_SedFloor = 137.367 m^2
# Materials List
# Plant Summary Calculations:
HL_PlantTotal := Z_EtTop - H_PlantFreeboard - Z_FiExitWeir  # error: This variable is undefined.
## Display AC variables
AC_EntranceTank =  # no stored result
AC_FlocTank =  # no stored result
AC_OperatorAccess = [
    "-layer m OpWalkwayCon"; "c t 132,132,132"; "OpWalkwayCon"; "  "; "_box 0.25,-0.25,1.07237 -14.24424,28.91332,1.27237"; "-group c OpWalkwayCon y "; "all "; "-layer s 0"; "  "; "-layer f OpWalkwayCon"
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]
AC_SedTank =  # no stored result
AC_ChemTanks =  # no stored result
AC_Filter =  # no stored result
AC_Cdc = [
    "-layer m CdcLayer"; "c t 0,0,0"; "CdcLayer"; "  "; "-layer m CdcAll"; "c t 214,214,214"; "CdcAll"; "  "; "_box -6.86055,25.03977,2.85329 -6.84467,25.03774,2.90409"; "_box -6.86055,25.03977,2.85329 -6.84467,25.09057,2.85533"
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]  # AC_MatApply
AI_EtFlocSedFiSed = [
    "-group c * y "; "all "; "-layer s 0"; "  "; "-layer f *"; "  "; "-layer t *Sed*"; "  "; "-layer s *Sed*"; "  "
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]
AI_EtFlocSedFi = [
    "laythw"; "_-view o t"; "-plot y "; "PublishToWeb PNG.pc3"; "User 1 (824.00 x 583.00 Pixels)"; "l n e F"; ""; " ."; "y  [FILEPATH]EtFlocSedFi_t"; "n y"
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]
AI_EtFlocSedFiFloc = [
    "-group c * y "; "all "; "-layer s 0"; "  "; "-layer f *"; "  "; "-layer t *Floc*"; "  "; "-layer s *Floc*"; "  "
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]
AI_EtFlocSedFiFilter = [
    "-group c * y "; "all "; "-layer s 0"; "  "; "-layer f *"; "  "; "-layer t Fi*"; "  "; "-layer s Fi*"; "  "
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]
Q_Plant = 0.085 m^3/s
