# Low Flow AguaClara Design Tool
Q_Plant := □  # error: This placeholder is empty.  # This file should only be used for plant flow rates between 1L/s and 3L/s!
method := "EtFlocSedFiLow"
## References
# MathCAD dimension calculations:
# [reference: ExpertInputs.xmcd]
# [reference: MathFunctions.xmcd]
# [reference: PipeDatabase.xmcd]
# [reference: MaterialsDatabase.xmcd]
# [reference: FluidsFunctions.xmcd]
# [reference: CdcFunctions.xmcd]
# [reference: SedTankFunctions.xmcd]
# [reference: SedimentationTankjem384.xmcd]
# [reference: Flocculator.xmcd]
# [reference: LFOM.xmcd]
# [reference: EntranceTankLowjem384.xmcd]
# [reference: LFStackedRapidSandFilter.xmcd]
# [reference: LinearCdc.xmcd]
# [reference: ChemStorageTanks.xmcd]
# AutoCAD drawing programs:
# Translators:
# These are the codes that take MathCAD outputs and create AutoCAD scripts that are used to draw the plant (formerly Basics)
# [reference: MtoATranslators.xmcd]
# The wrapped MtoA translator contains the functions that the user will want to access. These functions will draw pieces with full functionality - specifying the location, dimension, and orientation of the object. Also, it contains layer control and subtraction capabilities for grouped objects.
# [reference: MtoATranslatorsWrapped.xmcd]
# Drawing functions:
# [reference: ChannelF.xmcd]
# [reference: PlumbingF.xmcd]
# [reference: TankF.xmcd]
# [reference: StairsF.xmcd]
# [reference: DrainChannelF.xmcd]
# AutoCAD Script Files:
# [reference: FlocculatorACLow.xmcd]
# [reference: SedimentationTankACLow_jem384.xmcd]
# [reference: EntranceTankACLowjem384.xmcd]
# [reference: ChemStockTanksACLow.xmcd]
# [reference: LowFlowStackedRapidSandFilterAC.xmcd]
# [reference: CdcACLow.xmcd]
# [reference: OperatorAccessACLow.xmcd]
# [reference: MaterialsAC.xmcd]
# Materials List:
# [reference: MaterialsList.xmcd]
# Layouts:
# This file will execute at the very end to create multiple views of the entire plant in paperspace
# [reference: LayoutsAC.xmcd]
## All variables displayed must have the standard SI units. They may not have units attached by the user.
# General
Q_Plant = 0.0024 m^3/s
Pi_VenaContractaOrifice = 0.63
T_PlantWall = 0.15 m
W_SedPlate = 1.0668 m
T_ConcreteMin = 0.05 m
L_SedPlateSheet = 3 m
C_CoagStock = 200 kg/m^3
T_SedPlate = 0.002 m
Ti_CoagStock = 108000 s
T_SedWeir = 0.04 m
C_ChlorineStock = 15 kg/m^3
W_SedBay = 1.0668 m
Ti_ChlorineStock = 108000 s
HL_ChannelMax = 0.05 m  # Eliminate FCM variable from design specs
H_PlantFreeboard = 0.1 m
EN_DrillSeries = 0
# Entrance Tank
# Tank
HW_Et = 0.6534 m
HW_EtMax = 1.5 m
H_Et = 0.7534 m
Z_EtTop = 2.47391 m
L_Et = 1.23068 m
Z_Et = 1.72051 m
ZW_Et = 2.37391 m
W_Et = 0.428269 m
H_EtTop = 0.3 m  # height of the top part of the entrance tank above the hoppers
# Hoppers
H_EtHopperBack = 0.4534 m
N_EtFullHopper =  # error: This variable is undefined.
H_EtHopper = 0.4534 m
Z_EtHopper = 2.17391 m  # elevation of top of slab.
T_EtHopperLedge = 0.15 m
L_EtHopper =  # error
AN_EtSlope =  # error
# Rapid Mix
# Drain Channel
ED_Tee =  # error
ND_RMPipe = 0.0762 m
W_EtDC = 0.30875 m  # drain channel under entrance tank dimensions
# Drains
L_EtDC = 1.02908 m
ND_EtDrain = 0.0381 m
H_EtDC = 0.1016 m  # Give heights of the channel at the beginning and end and change the design specs to explain that it's sloped.
L_EtDrainStopper = 0.7354 m
# Flow measurement
ND_LfomPipe = 0.0762 m
HL_Flowmeasure = 0.2 m
Z_LfomOrifices = 2.17947 m  # elevation of the center of
HL_Lfom = 0.2 m
D_LfomOrifices = 0.0111125 m
B_LfomRows = 0.02 m
N_LfomOrifices = [7; 4; 2; 3; 1; 2; 2; 1; 2; 1]
H_LfomOrifices = [0.00555625; 0.0255562; 0.0455562; 0.0655562; 0.0855563; 0.105556; 0.125556; 0.145556; 0.165556; 0.185556] m
# Trash Rack
B_EtRebar = 0.019432 m
# Flow Control Valve | Other Parameters
# Overflow Weir
ND_EtFlowControl = 0.0381 m
V_EtUp =  # error
W_EtOverflowSlot = 0.0489204 m
Ti_Et =  # error
ND_EtOverflowDrain = 0.0762 m
H_EtOverflowCutaway = 0.0081534 m
L_EtOverflowWeir =  # error
W_PlantDC = 1 m
# Maybe give the vertical distances below the bottom of the sed tank of the beginning and end of the channel? Calculate them, display, and add to the design specs.
H_PlantDC =  # error
L_PlantDC = 3.39855 m
H_HumanAccess = 1.5 m
# Plant Drain Channel
# Coagulant
Z_CoagTank = 2.74161 m
C_CoagStockMax = 200 kg/m^3
C_ChlorineStockMax = 15 kg/m^3
Z_CoagTankOutlet = 2.84161 m
C_CoagDoseMax = 0.08 kg/m^3
C_ChlorineDoseMax = 0.002 kg/m^3
L_CdcFloatArm = 0.41275 m
N_CdcCoagTubes = 2
N_CdcChlorineTubes = 1
L_CdcScaleArm = 0.50165 m
L_CdcCoagTube = 0.401013 m
L_CdcChlorineTube = 0.464979 m
B_StockOutlet = 0.1 m
HL_CdcCoag = 0.2 m
HL_CdcChlorine = 0.1 m
Ti_CoagStock = 108000 s
Vol_CoagTank = 113.56 L
Vol_ChlorineTank = 113.56 L
H_CoagTankAboveHeadTank = 0.3 m
D_CdcCoag = 0.0015875 m
K_CdcTube = 2
D_CdcChlorine = 0.0015875 m
ND_EtFloat = 0.2032 m
Q_CoagStock = 9.6e-7 m^3/s
Q_ChlorineStock = 3.2e-7 m^3/s
ND_CoagPiping = 0.0127 m
# Coag Dose Controller
# Tank
EN_FlocType :=
    "horizontal" if EN_FlocHoriz == 1
    "vertical" otherwise
H_Floc = 2.08247 m
HW_FlocEnd = 1.60451 m
HW_FlocStart = 1.98247 m
Z_FlocTank = 0 m
L_Floc = 0.45 m
H_FlocPort = [0.28462; 0.28462; 0.28462; 0.28462; 0.28462; 0.28462; 0.28462; 0.28462; 0.28462; 0.28462; 0.28462; 0.28462; 0.28462; 0.28462; 0.28462] m
W_FlocChannel = 0.117402 m
N_FlocChannels = 15
# Drains
ND_FlocValve = 0.0508 m
N_FlocValves = 8
H_FlocSlope = 0.0301625 m
Ti_FlocDrain = 1800 s
# Parameters
ED_Floc = 0.0105 m^2/s^3
CP_Floc = 75 m^(2/3)
Ti_Floc = 513.722 s
G_Floc = 82.1663 1/s  # Look at Flocculator Positioning arrays
V_Floc = 0.373763 m/s
# Fill last channel with bafffles from last channel
ED_FlocMax = 0.00675131 m^2/s^3  # Fix port width to be based on energy dissipation in that channel
# Adjust spacing after the number of baffles per channel is known.
ED_FlocAve = 0.00675131 m^2/s^3  # Check the residence time of the flocculator should be at least 20minutes
HL_Floc = 0.353668 m
K_FlocBaffle = 2.5
CP_Floc = 75 m^(2/3)
# Baffles
N_FlocChannelBaffles = [3; 3; 3; 3; 3; 3; 3; 3; 3; 3; 3; 3; 3; 3; 3]
W_FlocPort = [0.0925; 0.0925; 0.0925; 0.0925; 0.0925; 0.0925; 0.0925; 0.0925; 0.0925; 0.0925; 0.0925; 0.0925; 0.0925; 0.0925; 0.28415] m
S_FlocBaffle = [0.1125; 0.1125; 0.1125; 0.1125; 0.1125; 0.1125; 0.1125; 0.1125; 0.1125; 0.1125; 0.1125; 0.1125; 0.1125; 0.1125; 0.1125] m
B_FlocBaffle = [0.1145; 0.1145; 0.1145; 0.1145; 0.1145; 0.1145; 0.1145; 0.1145; 0.1145; 0.1145; 0.1145; 0.1145; 0.1145; 0.1145; 0.1145] m
L_FlocBaffleLower = 1.51631 m
Z_FlocBaffles = [
    0, 0, 0, 0, 0, 0, 0, 0, 0, 0, 0, 0, 0, 0, 0;
    0.16875, 0.16875, 0.16875, 0.16875, 0.16875, 0.16875, 0.16875, 0.16875, 0.16875, 0.16875, 0.16875, 0.16875, 0.16875, 0.16875, 0.16875;
    0, 0, 0, 0, 0, 0, 0, 0, 0, 0, 0, 0, 0, 0, 0
] m
S_FlocBaffleFirst = 0.1125 m
L_FlocBaffleUpper = 1.91786 m
EN_FlocBaffle = 1
T_FlocBaffle = 0.002 m
# Modules
ND_FlocModulesMain = 0.0127 m
ND_FlocModulesLarge = 0.0381 m
L_FlocModuleLong = [0.571817; 0.571817; 0.571817; 0.571817; 0.571817; 0.571817; 0.571817; 0.571817; 0.571817; 0.571817; 0.571817; 0.571817; 0.571817; 0.571817; 0.571817] m
L_FlocModuleShort = [0.228317; 0.228317; 0.228317; 0.228317; 0.228317; 0.228317; 0.228317; 0.228317; 0.228317; 0.228317; 0.228317; 0.228317; 0.228317; 0.228317; 0.228317] m
ND_SpacerPipe = 0.0508 m
L_FlocModuleLongOuter = [0.457317; 0.457317; 0.457317; 0.457317; 0.457317; 0.457317; 0.457317; 0.457317; 0.457317; 0.457317; 0.457317; 0.457317; 0.457317; 0.457317; 0.457317] m
# Flocculator
# Sed Tanks
N_SedTanks = 1
L_Sed = 2.6119 m
N_SedBays = 1  # Number of bays of inlet manifolds in each sed tank
Q_SedBay = 0.0024 m^3/s
V_SedUpBod = 0.001 m/s  # design constraints
V_SedCBod = 0.00012 m/s
V_SedUp = 0.000952502 m/s  # Actual values from this design
W_SedSideSlopes = 0.511175 m
AN_SedSlope = 0.872665
Ti_Sed = 1285.95 s
# Sedimentation Tank Sludge Drain:
N_SedSludgeOrifices = 22  # per cell
Ti_SludgeDrain = 1800 s  # Tank Drain time
W_SedSludge = 0.0618281 m  # Width of the sludge channel
H_SedSludge = 0.0618281 m  # Depth of the sludge channel
# Distance center to center between drain orifices
B_SedSludgeOrifices = 0.104905 m
W_SedDrainCover = 0.101828 m
D_SedSludgeOrifice = 0.00931581 m  # Diameter of drain orifices
N_SedSludgeOrifices = 22
ND_SedSludgePipe = 0.0762 m
# Sedimentation Tank Dimensions:
Z_SedSludge = 0.0618281 m  # Height from 0 of the top of the sludge drain
Z_SedSideSlopes = 0.765473 m
W_Sed = 1.0668 m  # Total tank wall height
L_Sed = 2.6119 m  # Total tank length
H_Sed = 1.72881 m
# Sedimentation Tank Inlet Channel:
EN_InletChannelGeom = 0
HW_SedInletChannel = 0.229939 m
W_SedInletChannel = 0.28415 m
L_SedChannel = 1.0668 m
H_SedInletChannel = 0.329939 m
HL_SedWeirInlet = 0.0274216 m
W_SedInletChannelPreWeir = 0.28415 m
H_SedWeirInlet = 0.202518 m
W_SedWeirInlet = 0.28415 m
# Sedimentation Tank Effluent Launder:
N_SedLaunderOrifices = 22  # Number of orifices per launder
Z_SedLaunder = 1.56451 m
Q_SedLaunderOrifices = 0.000109091 m^3/s
B_SedLaunderOrifices = 0.1 m  # Center to center launder spacing
# More Launder Dimensions
ND_SedLaunder = 0.1016 m
D_SedLaunderOrifice = 0.015875 m
L_SedLaunder = 2.33807 m
HL_SedLaunderOrifice = 0.0390221 m
# Sedimentation Tank Inlet Manifold:
ND_SedManifold = 0.1524 m
L_SedManifoldDiffuser = 0.0561031 m
Z_SedManifoldPipe = 0.289635 m
ND_SedDiffuser = 0.0254 m
D_SedManifoldPort = 0.03175 m
B_SedManifoldPort = 0.05 m
N_SedManifoldPorts = 44
L_SedManifoldPipe = 2.18423 m
ED_SedInlet = 0.0105 m^2/s^3
Q_SedManifoldPort = 5.33333e-5 m^3/s
# Exit Channel:
W_SedExitChannel = 0.34 m
H_SedExitChannel = 0.329939 m
HW_SedExitChannel = 0.189939 m  # water height in exit channel from base of channel
H_SedWeirExit = 0.178587 m
# Lamella:
L_SedPlate = 0.5 m
B_SedPlate = 0.027 m  # center to center distance between lamella
S_SedPlate = 0.025 m  # spacing between lamella
N_SedPlates = 77  # Number of Sed Plates per Sedimentation Tank Bay.
N_SedModules = 7  # Number of modules per bay
N_SedModulePlates = 11  # Number of plates per module
AN_SedPlate = 1.0472
L_SedActive = 2.39831 m
Z_SedLaunder = 1.56451 m
HW_Sed = 1.60451 m
H_Sed = 1.72881 m
# SRSF
H_Fi =  # error
L_Fi =  # error
W_Fi =  # error
B_FiManifoldBranch = 0.1 m
ND_FiTrunk =  # error
ND_FiManBranch = 0.0127 m
ND_FiBwTrunk = 0.0508 m
ND_FiBwManBranch = 0.0381 m
ND_FiExitWaste =  # error
ND_FiBwWeirDrain =  # error
ND_FiBwDrain =  # error  # For the box that holds keeps the end of the siphon submerged
ND_FiSandOutlet = 0.0508 m
Ti_FiSand =  # error  # This is the time required to empty the filter of the sand.
ND_FiSiphonAirValve =  # error
ND_FiSiphon =  # error
Q_FiSiphonMax =  # error
B_FiSiphonManOrifices =  # error
N_FiSiphonManOrifices =  # error
D_FiSiphonManOrifices = 0.0440436 m
Ti_FiBwInitiation =  # error
H_FiSand = 1.21067 m
N_FiLayer = 6
H_FiLayer = 0.2 m
V_FiLayer = 0.00183333 m/s
HL_FiTerminal = 0.455621 m
V_FiBw = 0.011 m/s
HL_FiBwInitiation = 1.39856 m
HL_FiBwSS = 1.19856 m
D_FiSand =  # error
N_Fi = 3
Q_Fi = 0.0008 m^3/s
W_Slots =  # error
B_FiBwManSlot = 0.0047625 m
L_FiBwManSlot =  # error
B_FiManSlot = 0.0047625 m
L_FiManSlot =  # error
N_FiSlotRows = 2
Z_FiBottom = -0.43665 m
Z_FiTop =  # error
# Weirs
HL_FiWeir =  # error
L_FiWeir =  # error
Z_FiEntranceWeir = 1.59688 m
Z_FiBwWeir =  # error
Z_FiSiphonInlet =  # error  # This is the centerline elevation of the siphon orifices
Z_FiExitWeir =  # error
Z_FiExitBottom =  # error  # bottom of the filtered water box
Z_FiEntranceBottom =  # error  # bottom of the entrance box
Z_FiSiphonCoupling =  # error
Z_FiBwTop =  # error
W_FiBwDrain =  # error
H_FiBwDrain =  # error
N_Launders =  # error
L_LaunderPipeTotal =  # error
N_LaunderCouplings =  # error
N_ValveCouplings = 1
N_SedPlatesTotal = 77
N_SedPlatesPerSheet = 6
N_SedPlateSheets = 13
N_Valves = 1
A_EtFloor = 1.11475 m^2
W_FlocWithWalls = 4.01103 m
L_FlocWithWalls = 2.9119 m
Vol_FlocFloor = 1817.48 L
A_FlocFloor = 12.1165 m^2
Vol_SedSlopes = 406.68 L
A_SedWalls =  # error
A_SedFloor = 3.97999 m^2
# Materials List
# Plant Summary Calculations:
HL_PlantTotal := Z_EtTop - H_PlantFreeboard - Z_FiExitWeir
HL_PlantTotal =  # error
## Display AC variables
AC_EntranceTank = [
    "-layer m EtCon"; "c t 132,132,132"; "EtCon"; "  "; "_wedge -0.54034,2.34507,1.72051 -0.15715,1.9168,2.17391"; "_box -0.54034,2.34507,1.72051 -0.69034,1.9168,2.17391"; "_wedge -0.69034,2.34507,1.72051 -1.07353,1.9168,2.17391"; "_zoom w -0.01,2.33507,1.71051 -0.26112,5.93082,3.90442"; "_wedge 0,2.34507,1.72051 -0.27112,3.57575,2.17391"; "rotate3d l  z 0,2.34507,1.72051 90"
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]
AC_FlocTank = [
    "-layer m FlocTankCon"; "c t 132,132,132"; "FlocTankCon"; "  "; "_-view o t _zoom w 0.16,1.0568,0 -0.61,3.9887,2.08247"; "_box 0,1.2168,0 -0.45,3.8287,2.08247 _box 0.15,1.0668,-0.15 -0.6,3.9787,2.08247"; "_subtract 0.15,1.0668,-0.15  0,1.2168,0 "; "_box 0.15,1.0668,-0.15 0.2,3.9787,2.08247"; "mirror3d all  yz -0.225,0 n  "; "_union all "
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]
AC_OperatorAccess =  # error
AC_SedTank =  # no stored result
AC_ChemTanks =  # no stored result
AC_Filter =  # no stored result
AC_ZZLayout := AC_Layout
AC_ZZMatApply
AC_Cdc = [
    "-layer m CdcLayer"; "c t 0,0,0"; "CdcLayer"; "  "; "-layer m CdcAll"; "c t 214,214,214"; "CdcAll"; "  "; "_zoom w 0.11,2.00224,2.44661 0.20588,2.12237,2.56471"; "_box 0.15,2.04427,2.48661 0.16588,2.04224,2.52471"
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]
AC_ZZLayout =  # error
AI_EtFlocSedFiLow = [
    "laythw"; "_-view o t"; "-plot y "; "PublishToWeb PNG.pc3"; "User 1 (824.00 x 583.00 Pixels)"; "l n e F"; ""; " ."; "y  [FILEPATH]EtFlocSedFiLow_t"; "n y"
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]
AI_EtFlocSedFiLowSed = [
    "-group c * y "; "all "; "-layer s 0"; "  "; "-layer f *"; "  "; "-layer t *Sed*"; "  "; "-layer s *Sed*"; "  "
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]
AI_EtFlocSedFiLowFloc = [
    "-group c * y "; "all "; "-layer s 0"; "  "; "-layer f *"; "  "; "-layer t *Floc*"; "  "; "-layer s *Floc*"; "  "
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]
Q_Plant = 0.0024 m^3/s
# [component: inputs stack(AC_EntranceTank, AC_Cdc, AC_ChemTanks, AC_FlocTank, AC_SedTank, AC_Filter, AC_OperatorAccess)]
