# Low Flow AguaClara Design Tool
Q_Plant := 0.8*L/s  # This file should only be used for plant flow rates between 1L/s and 3L/s!
method := "EtFlocSedFiLow"
## References
# MathCAD dimension calculations:
# [reference: ExpertInputs.xmcd]
# [reference: MathFunctions.xmcd]
# [reference: PipeDatabase.xmcd]
# [reference: MaterialsDatabase.xmcd]
# [reference: FluidsFunctions.xmcd]
# [reference: CdcFunctions.xmcd]
# [reference: SedimentationTankjem384.xmcd]
# [reference: Flocculator.xmcd]
# [reference: LFOM.xmcd]
# [reference: EntranceTankLowjem384.xmcd]
# [reference: StackedRapidSandFilter.xmcd]
# [reference: LinearCdc.xmcd]
# [reference: ChemStorageTanks.xmcd]
# AutoCAD drawing programs:
# Translators:
# These are the codes that take MathCAD outputs and create AutoCAD scripts that are used to draw the plant (formerly Basics)
# [reference: MtoATranslators.xmcd]
# The wrapped MtoA translator contains the functions that the user will want to access. These functions will draw pieces with full functionality - specifying the location, dimension, and orientation of the object. Also, it contains layer control and subtraction capabilities for grouped objects.
# [reference: MtoATranslatorsWrapped.xmcd]
# Drawing functions:
# [reference: ChannelF.xmcd]
# [reference: PlumbingF.xmcd]
# [reference: TankF.xmcd]
# [reference: StairsF.xmcd]
# [reference: DrainChannelF.xmcd]
# AutoCAD Script Files:
# [reference: FlocculatorACLow.xmcd]
# [reference: SedimentationTankACLow_jem384.xmcd]
# [reference: EntranceTankACLowjem384.xmcd]
# [reference: ChemStockTanksAC.xmcd]
# [reference: StackedRapidSandFilterAC.xmcd]
# [reference: CdcAC.xmcd]
# [reference: OperatorAccessAC.xmcd]
# [reference: MaterialsAC.xmcd]
# Materials List:
# [reference: MaterialsList.xmcd]
# Layouts:
# This file will execute at the very end to create multiple views of the entire plant in paperspace
# [reference: LayoutsAC.xmcd]
## All variables displayed must have the standard SI units. They may not have units attached by the user.
# General
Q_Plant = 0.0008 m^3/s
Pi_VenaContractaOrifice = 0.63
T_PlantWall = 0.15 m
W_SedPlate = 1.0668 m
T_ConcreteMin = 0.05 m
L_SedPlateSheet = 3 m
C_CoagStock = 200 kg/m^3
T_SedPlate = 0.002 m
Ti_CoagStock = 108000 s
T_SedWeir = 0.04 m
C_ChlorStock =  # error: This variable is undefined.
W_SedBay = 1.0668 m
Ti_ChlorineStock = 108000 s
HL_ChannelMax = 0.05 m  # Eliminate FCM variable from design specs
H_PlantFreeboard = 0.1 m
EN_DrillSeries = 0
# Entrance Tank
V_EtUp =  # error
W_EtCapture =  # error
H_EtOverflowChannel =  # error
H_Et = 0.714253 m
H_EtTop = 0.3 m  # height of the top part of the entrance tank above the hoppers
W_Et = 0.428269 m
L_Et = 1.02005 m
ND_EtDrain = 0.0381 m
HL_Lfom = 0.2 m
ZW_Et = 2.33317 m
Z_EtTop = 2.43317 m
Z_Et = 1.71891 m  # elevation of top of slab.
ND_RMPipe = 0.0381 m
Z_EtHopper = 2.13317 m
H_EtHopper = 0.414253 m
N_EtHoppers =  # error
ND_EtFlowControl = 0.0254 m
L_EtHopper =  # error
AN_EtSlope =  # error
W_EtDC = 0.2643 m  # drain channel under entrance tank dimensions
L_EtDC = 0.862899 m
H_EtDC = 0.05715 m  # Give heights of the channel at the beginning and end and change the design specs to explain that it's sloped.
# Flow measurement
D_LfomOrifices = 0.00635 m
S_LfomRows =  # error
H_LfomOrifice =  # error
Q_LfomScale =  # error
N_LfomOrifices = [7; 4; 2; 3; 1; 3; 1; 1; 2; 1]
ND_Lfom =  # error
HL_Lfom = 0.2 m
# Rapid Mix
ED_Tee =  # error
Z_LfomOrifices = 2.13634 m  # elevation of the center of
Z_EtExit =  # error  # elevation of center of pipe exiting the entrance tank and heading toward the flocculator
W_DC =  # error
# Maybe give the vertical distances below the bottom of the sed tank of the beginning and end of the channel? Calculate them, display, and add to the design specs.
H_DC =  # error
L_DC =  # error
# Plant Drain Channel
# Coag Dose Controller
Z_CoagTank = 2.70087 m
Z_CoagTankOutlet = 2.80087 m
L_CdcFloatArm = 0.41275 m
Q_CdcMax =  # error
L_CdcScaleArm = 0.50165 m
C_CoagDoseMax = 0.08 kg/m^3
B_StockOutlet = 0.1 m
L_CoagCdcTube =  # error
D_CdcTube = ƒ(any1, any1^-1 · any2^2 · Length^-2 · Mass · Time^-1, Length^-3 · Mass, any2, any3 · Length, any2^2 · any3 · Length^-1, Unitless, any3) → any2
N_CoagCdcTubes =  # error
HL_Cdc =  # error
L_CdcFloatArm = 0.41275 m
L_CdcScaleArm = 0.50165 m
# Flocculator
H_Floc = 1.93005 m
Z_FlocTank = 0 m  # Look at Flocculator Positioning arrays
N_FlocValves = 4
W_FlocChannel = 0.0744707 m
Ti_Floc = 609.619 s  # Fill last channel with bafffles from last channel
H_FlocSlope = 0.0301625 m  # Fix port width to be based on energy dissipation in that channel
ED_Floc = 0.0105 m^2/s^3
# Adjust spacing after the number of baffles per channel is known.
V_Floc = 0.0431555 m/s  # Check the residence time of the flocculator should be at least 20minutes
HW_FlocEnd = 1.53611 m
ND_FlocValve = 0.0508 m
CP_Floc = 75 m^(2/3)
ED_FlocAve = 0.00482278 m^2/s^3
Ti_FlocDrain = 1800 s
CP_FlocTotal =  # error
ED_FlocMax = 0.00482278 m^2/s^3
N_FlocChannels = 7
G_Floc = 69.4463 1/s
W_Floc = 1.02005 m
HL_Floc = 0.299803 m
ED_FlocChannelFirst =  # error
HW_FlocStart = 1.83005 m
S_FlocBaffle = [0.075; 0.075; 0.075; 0.075; 0.075; 0.075; 0.075] m
B_FlocBaffle = [0.077; 0.077; 0.077; 0.077; 0.077; 0.077; 0.077] m
N_FlocChannelBaffles = [5; 5; 5; 5; 5; 5; 5]
W_FlocPort = [0.055; 0.055; 0.055; 0.055; 0.055; 0.055; 0.228587] m
S_FlocBaffleFirst = 0.075 m
HL_FlocChannels =  # error
L_FlocBaffleLower = 1.45524 m
L_FlocBaffleUpper = 1.7825 m
H_FlocPort = [1.06871; 1.06871; 1.06871; 1.06871; 1.06871; 1.06871; 1.06871] m
Ti_Floc = 609.619 s  # residence time of the flocculator
N_FlocBaffles =  # error
ND_FlocValve = 2 in
EN_FlocBaffle = 1
# Sed Tanks
N_SedTanks = 1
L_Sed = 1.02005 m
N_SedBays = 1  # Number of bays of inlet manifolds in each sed tank
Q_SedBay = 0.0008 m^3/s
V_SedUpBod = 0.001 m/s  # design constraints
V_SedCBod = 0.00012 m/s
V_SedUp = 0.000973843 m/s  # Actual values from this design
V_SedC =  # error
W_SedSideSlopes = 0.52505 m
AN_SedSlope = 0.872665
Ti_Sed = 1192.11 s
# Sedimentation Tank Sludge Drain:
N_SedSludgeOrifices = 7  # per cell
Ti_SludgeDrain = 1800 s  # Tank Drain time
W_SedSludge = 0.0348051 m  # Width of the sludge channel
H_SedSludge = 0.0348051 m  # Depth of the sludge channel
# Distance center to center between drain orifices
B_SedSludgeOrifices = 0.102578 m
W_SedDrainCover = 0.0748051 m
D_SedSludgeOrifice = 0.00957703 m  # Diameter of drain orifices
N_SedSludgeOrifices = 7
ND_SedSludgePipe = 0.0381 m
# Sedimentation Tank Dimensions:
Z_SedSludge = 0.0348051 m  # Height from 0 of the top of the sludge drain
Z_SedSideSlopes = 0.727236 m
W_Sed = 1.0668 m  # Total tank wall height
L_Sed = 1.02005 m  # Total tank length
H_Sed = 1.63024 m
# Sedimentation Tank Inlet Channel:
EN_InletChannelGeom = 0
HW_SedInletChannel = 0.16372 m
W_SedInletChannel = 0.228587 m
L_SedChannel = 1.0668 m
H_SedInletChannel = 0.26372 m
HL_SedWeirInlet = 0.0152408 m
W_SedInletChannelPreWeir = 0.228587 m
H_SedWeirInlet = 0.148479 m
W_SedWeirInlet = 0.228587 m
# Sedimentation Tank Effluent Launder:
N_SedLaunderOrifices = 9  # Number of orifices per launder
N_SedLaunderOrificesRow =  # error  # Number of orifices per row
Z_SedLaunder = 1.49611 m
Q_SedLaunderOrifices = 8.88889e-5 m^3/s
B_SedLaunderOrifices = 0.1 m  # Center to center launder spacing
# More Launder Dimensions
ND_SedLaunder = 0.0508 m
D_SedLaunderOrifice = 0.014 m
L_SedLaunder = 1.01208 m
HL_SedLaunderOrifice = 0.0428323 m
# Sedimentation Tank Inlet Manifold:
ND_SedManifold = 0.1016 m
L_SedManifoldDiffuser = 0.214442 m
Z_SedManifoldPipe = 0.368449 m
ND_SedDiffuser = 0.0254 m
D_SedManifoldPort = 0.028 m
B_SedManifoldPort = 0.05 m
N_SedManifoldPorts = 14
L_SedManifoldPipe = 0.696355 m
ED_SedInlet = 0.0105 m^2/s^3
Q_SedManifoldPort = 5.71429e-5 m^3/s
# Exit Channel:
W_SedExitChannel = 0.34 m
H_SedExitChannel = 0.26372 m
HW_SedExitChannel = 0.12372 m  # water height in exit channel from base of channel
H_SedWeirExit = 0.118263 m
# Lamella:
L_SedPlate = 0.5 m
B_SedPlate = 0.027 m  # center to center distance between lamella
S_SedPlate = 0.025 m  # spacing between lamella
N_SedPlates = 26  # Number of Sed Plates per Sedimentation Tank Bay.
N_SedModules = 2  # Number of modules per bay
N_SedModulePlates = 13  # Number of plates per module
AN_SedPlate = 1.0472
L_SedActive = 0.80829 m
Z_SedLaunder = 1.49611 m
HW_Sed = 1.53611 m
H_Sed = 1.63024 m
# SRSF
H_Fi = 4.2795 m
L_Fi = 0.282393 m
W_Fi = 0.317865 m
B_FiManifoldBranch = 0.1 m
ND_FiTrunk = 0.0254 m
ND_FiManBranch = 0.0254 m
ND_FiBwTrunk = 0.0508 m
ND_FiBwManBranch = 0.0381 m
ND_FiExitWaste = 0.0254 m
ND_FiBwWeirDrain =  # error
ND_FiBwDrain =  # error  # For the box that holds keeps the end of the siphon submerged
ND_FiSandOutlet = 0.0508 m
Ti_FiSand = 44.0426 s  # This is the time required to empty the filter of the sand.
ND_FiSiphonAirValve = 0.0127 m
ND_FiSiphon = 0.0381 m
Q_FiSiphonMax =  # error
B_FiSiphonManOrifices = 0.112621 m
N_FiSiphonManOrifices = 2
D_FiSiphonManOrifices = 0.03175 m
Ti_FiBwInitiation =  # error
H_FiSand = 1.24083 m
N_FiLayer = 6
H_FiLayer = 0.2 m
V_FiLayer = 0.00183333 m/s
HL_FiTerminal = 0.455621 m
V_FiBw = 0.011 m/s
HL_FiBwInitiation = 1.42842 m
HL_FiBwSS = 1.22842 m
D_FiSand =  # error
N_Fi = 1
Q_Fi = 0.0008 m^3/s
W_Slots =  # error
B_FiBwManSlot = 0.0047625 m
L_FiBwManSlot =  # error
B_FiManSlot = 0.0047625 m
L_FiManSlot =  # error
N_FiSlotRows = 2
Z_FiBottom = -2.7549 m
Z_FiTop = 1.5246 m
# Weirs
HL_FiWeir =  # error
L_FiWeir =  # error
Z_FiEntranceWeir = 1.4149 m
Z_FiBwWeir =  # error
Z_FiSiphonInlet = -0.941816 m  # This is the centerline elevation of the siphon orifices
Z_FiExitWeir =  # error
Z_FiExitBottom = 0.470838 m  # bottom of the filtered water box
Z_FiEntranceBottom = 0.470838 m  # bottom of the entrance box
Z_FiSiphonCoupling = 0.777779 m
Z_FiBwTop =  # error
W_FiBwDrain =  # error
H_FiBwDrain =  # error
N_Launders =  # error
L_LaunderPipeTotal =  # error
N_LaunderCouplings =  # error
N_ValveCouplings = 1
N_SedPlatesTotal = 26
N_SedPlatesPerSheet = 6
N_SedPlateSheets = 5
N_Valves = 1
A_EtFloor = 0.96135 m^2
W_FlocWithWalls = 1.5713 m
L_FlocWithWalls = 1.32005 m
Vol_FlocFloor = 340.829 L
A_FlocFloor = 2.27219 m^2
Vol_SedSlopes =  # error
A_SedWalls =  # error
A_SedFloor = 1.80424 m^2
# Materials List
# Plant Summary Calculations:
HL_PlantTotal := Z_EtTop - H_PlantFreeboard - Z_FiExitWeir
HL_PlantTotal =  # error
## Display AC variables
AC_EntranceTank = [
    "-layer m EtCon"; "c t 132,132,132"; "EtCon"; "  "; "_wedge -0.37636,2.22334,1.71891 -0.15715,1.79507,2.13317"; "_box -0.37636,2.22334,1.71891 -0.52636,1.79507,2.13317"; "_wedge -0.52636,2.22334,1.71891 -0.8629,1.79507,2.13317"; "_zoom w -0.01,2.21334,1.70891 -0.26112,5.47672,3.86208"; "_wedge 0,2.22334,1.71891 -0.27112,3.24339,2.13317"; "rotate3d l  z 0,2.22334,1.71891 90"
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]
AC_FlocTank = [
    "-layer m FlocTankCon"; "c t 132,132,132"; "FlocTankCon"; "  "; "_-view o t _zoom w 0.16,1.0568,0 -0.61,2.39685,1.93005"; "_box 0,1.2168,0 -0.45,2.23685,1.93005 _box 0.15,1.0668,-0.15 -0.6,2.38685,1.93005"; "_subtract 0.15,1.0668,-0.15  0,1.2168,0 "; "_box 0.15,1.0668,-0.15 0.2,2.38685,1.93005"; "mirror3d all  yz -0.225,0 n  "; "_union all "
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]
AC_OperatorAccess =  # error
AC_SedTank =  # no stored result
AC_ChemTanks =  # no stored result
AC_Filter =  # error
AC_ZZLayout := AC_Layout
AC_ZZMatApply
AC_Cdc = [
    "-layer m CdcLayer"; "c t 0,0,0"; "CdcLayer"; "  "; "-layer m CdcAll"; "c t 214,214,214"; "CdcAll"; "  "; "_box -1.17005,1.92254,2.43317 -1.15417,1.92051,2.48397"; "_box -1.17005,1.92254,2.43317 -1.15417,1.97334,2.4352"
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]
AC_ZZLayout =  # error
AI_EtFlocSedFiLow = [
    "laythw"; "_-view o t"; "-plot y "; "PublishToWeb PNG.pc3"; "User 1 (824.00 x 583.00 Pixels)"; "l n e F"; ""; " ."; "y  [FILEPATH]EtFlocSedFiLow_t"; "n y"
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]
AI_EtFlocSedFiLowSed = [
    "-group c * y "; "all "; "-layer s 0"; "  "; "-layer f *"; "  "; "-layer t *Sed*"; "  "; "-layer s *Sed*"; "  "
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]
AI_EtFlocSedFiLowFloc = [
    "-group c * y "; "all "; "-layer s 0"; "  "; "-layer f *"; "  "; "-layer t *Floc*"; "  "; "-layer s *Floc*"; "  "
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]
Q_Plant = 0.0008 m^3/s
# [component: inputs stack(AC_EntranceTank, AC_Cdc, AC_FlocTank, AC_SedTank, AC_ChemTanks)]
