# AguaClara Design Tool
Q_Plant := □
# Need to check inlet filter channel design to make sure it can handle the flow
HL_FlocMax := □
H_SedSlopesToFlocWeirMin := □
Q_Plant := 15*L/s
T_FlocSlab := □
HL_FlocMax := 40 cm
T_SedWall := □
H_SedSlopesToFlocWeirMin := 25 cm
T_SedDividingWall := □
T_FlocSlab := 15 cm
T_SedChannelWall := □
T_SedWall := 15 cm
T_FlocWall := □
T_SedDividingWall := 15 cm
T_FlocDividingWall := □
T_SedChannelWall := 15 cm
T_FiWall := □
T_FlocWall := 15 cm
T_FiBoxWall := □
T_FlocDividingWall := 15 cm
T_PlantWall := □
T_FiWall := 25 cm
T_PlantFloor := □
T_FiBoxWall := 15 cm
T_ChemSlab := □
T_PlantWall := 15 cm
T_DrainChannelWall := □
T_PlantFloor := 20 cm
C_CoagDoseMax := □
T_ChemSlab := 15 cm
T_DrainChannelWall := 15 cm
C_ChlorDoseAve := □
C_CoagDoseMax := 40*mg/L
C_ChlorDoseAve := 1*mg/L
method := "EtFlocSedFi"
Mod := 0
## References
# Mathcad to AutoCAD translators:
Z_PlantUpperDCBottom := -0.471 m
# [reference: MtoATranslators.xmcd]
L_Fi := 1.238 m
# The wrapped MtoA translator contains the functions that the user will want to access. These functions will draw pieces with full functionality - specifying the location, dimension, and orientation of the object. Also, it contains layer control and subtraction capabilities for grouped objects.
Fi_origin := [-9.965; 0.1; -2.706]*m
W_Fi := 1.32 m
# [reference: MtoATranslatorsWrapped.xmcd]
Z_FiInletChannelBottom := 1.11 m
# Plant design calculations:
# [reference: ExpertInputs.xmcd]
mirrorpt := [-9.038; 0; 1.11]*m
# [reference: MathFunctions.xmcd]
# [reference: PipeDatabase.xmcd]
# [reference: MaterialsDatabase.xmcd]
# [reference: FluidsFunctions.xmcd]
# [reference: SedimentationTank.xmcd]
# [reference: LFOM.xmcd]
# [reference: FlocculatorEntranceTank.xmcd]
ND_FiSiphon := 0.203 m
FiEntranceBox_origin := [-7.131; 0; 0.279]*m
FiOverflowBox_Origin := [-7.231; 1.078; 0.986]*m
# [reference: StackedRapidSandFilterLow.xmcd]
# [reference: ChemicalDoseController.xmcd]
L_FiOverflow := 0.666 m
# AutoCAD drawing functions:
N_FlocChannels = 2
L_FiExit := 0.518 m
W_FiEntrance := 0.928 m
N_FiPeninsulas := 0
# [reference: ChannelF.xmcd]
# [reference: PlumbingF.xmcd]
W_FiOverflow := 0.284 m
H_FiInletChannel := 0.5 m
# [reference: TankF.xmcd]
# [reference: StairsF.xmcd]
# [reference: DrainChannelF.xmcd]
W_FiInletChannel = 0.335744 m
SedToFiChannel_Origin := [-4.451; -0.384; 1.405]*m
N_FlocChannels = 2
# AutoCAD script files:
# [reference: FlocculatorAC.xmcd]
# [reference: SedimentationTankAC.xmcd]
# [reference: EntranceTankCompactAC.xmcd]
# [reference: StackedRapidSandFilterACLow.xmcd]
# [reference: ChemStockTanksAC.xmcd]
# [reference: OperatorAccessAC.xmcd]
# [reference: CdcAC.xmcd]
N_FlocChannels = 2
BasementStairs := StairsFixedF(BasementStairs_Origin, W_BasementStairs + T_PlantWall, H_BasementStairs, L_BasementStairs, 0 deg)  # error: This array index is invalid for this array.
# Materials list:
# There is an issue with this function within OperatorAccessAC
# [reference: MaterialsList.xmcd]
# Layouts:
# This file will execute at the very end to create multiple views of the entire plant in paperspace
# [reference: LayoutsAC.xmcd]
# Section Cuts:
# This file will create section cuts in paper space... eventually
# weird stuff?
# [reference: SectionCutsAC.xmcd]
## All variables displayed must have the standard SI units. They may not have units attached by the user.
# General variables displayed
# Plant summary calculations
HL_PlantTotal := ZW_EtMax - Z_FiExitBottom
Q_Plant = 0.015 m^3/s
HL_PlantTotal =  # error: This variable is undefined.
H_PlantFreeboard = 0.1 m
# Entrance tank variables displayed
# Tank
L_EtMax = 1.302 m
H_Et = 2.52625 m
L_Et = 1.302 m
W_Et = 0.53 m
H_EtApparent = 1.25464 m
AN_EtSlope1 = 0.872665
AN_EtSlope2 = 0.3973
# Parameters
V_EtCaptureBod = 0.008 m/s
V_EtCapture = 0.00846729 m/s
# Sedimentation plates
L_EtPlate = 0.4 m
L_EtTopPlate = 0.711081 m
N_EtPlates = 14
S_EtPlate = 0.025 m
AN_EtPlate = 0.872665
ND_EtMod = 0.0127 m
PS_EtModStr = "SDR 13.5"
ND_EtModSpacer = 0.01905 m
PS_EtModSpacerStr = "SDR 17"
ND_EtPlateSupport = 0.0762 m
PS_EtPlateSupportStr = "SDR 26"
T_EtPlate = 0.002 m
# Rapid mix
ND_RMPipe = 0.2032 m
PS_RMPipeStr = "SDR 41"
ED_RapidMix = 3 m^2/s^3
D_RMOrifice = 0.146704 m
HL_RMOrifice = 0.101158 m
HL_RMPipe = 0.0109916 m
L_FlocContact = 0.252226 m
H_FlocContact = 1.8338 m
Ti_FlocContact = 16.3428 s
Pi_VCOrifice = 0.63
Pi_JetRound = 0.5
# Drains
ND_EtDrain = 0.0762 m
L_EtDrainStopper = 2.52225 m
PS_EtDrainStr = "SDR 26"
# Flow measurement
HL_Lfom = 0.2 m
D_LfomOrifices = 0.022225 m
B_LfomRows = 0.025 m
N_LfomOrifices = [15; 4; 5; 4; 3; 3; 3; 2]
H_LfomOrifices = [0.0111125; 0.0361125; 0.0611125; 0.0861125; 0.111113; 0.136112; 0.161113; 0.186113] m
N_LfomRows = 8
# Chemical dose controller variables displayed
H_CoagTankAboveHeadTank = 0.3 m
ND_EtFloat = 0.2032 m
HL_Cdc = 0.2 m
# Coagulant
ID_CoagTube = 0.003175 m
C_CoagStock = 166.667 kg/m^3
C_CoagDoseMax = 0.04 kg/m^3
Q_CoagMax = 3.6e-6 m^3/s
N_CoagTubes = 3
N_CoagTubesActive = 2
L_CoagTube = 1.91339 m
Vol_CoagStock = 450 L
M_CoagSack = 25 kg
N_CoagSacks = 3
Nu_CoagStock = 1.3829e-6 m^2/s
ND_CoagColumn = 0.009525 m
ID_CoagColumn = 0.0125222 m
Ti_CoagColumnMin = 17.1048 s
H_CoagColumnScale = 0.5 m
D_CoagFloatValveOrifice = 0.0023622 m
HL_CoagFloatValveOrifice = 0.0866816 m
# Chlorine
ID_ChlorTube = 0.003175 m
C_ChlorStock = 6.10024 kg/m^3
C_ChlorDoseMax = 0.002 kg/m^3
Q_ChlorMax = 4.91784e-6 m^3/s
N_ChlorTubes = 3
N_ChlorTubesActive = 2
L_ChlorTube = 1.89156 m
Vol_ChlorStock = 208.198 L
M_ChlorStock = 1.81437 kg
Nu_ChlorStock = 1e-6 m^2/s
ND_ChlorColumn = 0.0127 m
ID_ChlorColumn = 0.0157988 m
Ti_ChlorColumnMin = 19.9312 s
H_ChlorColumnScale = 0.5 m
D_ChlorFloatValveOrifice = 0.0023622 m
HL_ChlorFloatValveOrifice = 0.16176 m
# Flocculator variables displayed
# Tank
H_Floc = 2.1141 m
L_Floc = 5.27179 m
W_FlocChannel = 0.53 m
W_FlocChannelMaxPlate = 1.06 m
W_FlocChannelMinPlate = 0.53 m
W_FlocChannelMin = 0.53 m
W_FlocChannelMinEfficient = 0.124925 m
N_FlocChannels = 2
HW_FlocEnd = 1.55246 m
T_FlocSlab = 0.15 m
Vol_Floc = 8592.81 L
H_FlocPort = 0.609632 m
W_FlocPort = 0.133112 m
# Drains
ND_FlocDrain = 0.0762 m
PS_FlocDrainStr = "SDR 26"
Q_FlocDrain = 0.00954757 m^3/s
# Parameters
HL_Floc = 0.461647 m
HL_FlocMax = 0.4 m
CP_Floc = 85.9206 m^(2/3)
V_Floc = 0.184845 m/s
ED_FlocAve = 0.0101705 m^2/s^3
ED_FlocAveMinSettling = 0.005 m^2/s^3
ED_FlocMax = 0.020341 m^2/s^3
Ti_Floc = 572.854 s
Ti_FlocActive = 465.11 s
G_FlocAve = 100.849 1/s
GTheta_Floc = 46905.9
CP_FlocBod = 75 m^(2/3)
Alpha_EpsilonFloc = 2
Alpha_PsiFloc = 0.890899
Pi_JetPlane = 0.225
Ti_FlocDrain = 900 s
Pi_HSMin = 3
Pi_HSMax = 6
Pi_HSTransition = 5
K_FlocBaffle = 2.5
Pi_VCBaffle = 0.387426
Vol_FlocBod = 5849.93 L
W_FlocChannelCP = 0.447605 m
S_FlocBaffleMin = 0.153679 m
HL_FlocBod = 0.4 m
ED_FlocAveBod = 0.0100582 m^2/s^3
ED_FlocAveCP = 0.0100582 m^2/s^3
Ti_FlocMinCP = 389.995 s
Vol_FlocMinCP = 5849.93 L
ED_FlocAveMax = 0.0100582 m^2/s^3
Nu_Water = 1e-6 m^2/s
Vol_FlocMinChannels = 5178.25 L
# Baffles
S_FlocBaffle = 0.153112 m
T_FlocBaffle = 0.002 m
B_FlocBaffle = 0.155112 m
H_FlocBaffleLow = 1.39935 m
H_FlocBaffleHigh = 1.96099 m
S_FlocBaffleSetBackPlastic = 0.02 m
N_FlocChannelBaffles = 33
N_FlocFirstChannelBaffles = 23
N_FlocLastChannelBaffles = 30
N_FlocBaffles = 53
N_FlocChannelSpaces = 34
ND_FlocMod = 0.0127 m
PS_FlocModStr = "SDR 13.5"
ND_FlocSpacer = 0.01905 m
PS_FlocSpacerStr = "SDR 17"
# Obstacles
ND_FlocObs = 0.1016 m
H_FlocObs = 0.776229 m
N_FlocSpaceExpansions = 2
N_FlocExpansions = 106
CP_FlocExpansion = 0.810572 m^(2/3)
PS_FlocObsStr = "SDR 41"
W_FlocObstacleWake = 0.0937922 m
N_FlocSpaceObstacles = 1
# Sedimentation tank variables displayed
# General parameters
N_SedTanks = 3
Q_Sed = 0.005 m^3/s
V_SedUpBod = 0.001 m/s
# design constraints
V_SedCBod = 0.00012 m/s
V_SedUp = 0.000998981 m/s
# Actual values from this design
V_SedC = 0.000109193 m/s
Ti_Sed = 1405.93 s
# General dimensions
W_Sed = 1.06 m
L_Sed = 5.27179 m
H_Sed = 1.77359 m
HW_Sed = 1.67359 m
L_SedUpflow = 4.72179 m
W_SedSideSlopes = 0.489233 m
H_SedSideSlopes = 0.583045 m
H_SedFlocWeir = 0.833045 m
H_SedLamellaBottom = 0.981305 m
HW_Sed = 1.67359 m
AN_SedSlope = 0.872665
AN_SedHopperSlopeMin = 0.666405
# Inlet channel
HL_SedInletChannelMax = 0.00451316 m
HW_SedInletChannel = 0.297465 m
W_SedInletChannelPreWeir = 0.336537 m
W_SedInletChannelPostWeir = 0.15 m
W_SedInletChannel = 0.536538 m
L_SedChannel = 3.63 m
H_SedInletChannel = 0.397465 m
H_SedWeirInlet = 0.317465 m
HL_SedWeirInlet = 0.0170258 m
H_SedInletChannel = 0.397465 m
ND_SedChannelDrain = 0.0762 m
PS_SedChannelDrainStr = "SDR 26"
H_SedIChanStep = 0.082075 m
H_SedIChanLastCoupling = 0.16415 m
HL_SedInlet =  # error
# Exit channel
W_SedExitChannelPreWeir = 0.15 m
W_SedExitChannelPostWeir = 0.23415 m
W_SedExitChannel = 0.43415 m
H_SedExitChannel = 0.397465 m
H_SedWeirExit =  # error
H_SedExitChannel = 0.397465 m
HW_SedExitChannel = 0.251176 m
# Exit launder
HL_SedLaunderBod = 0.04 m
ND_SedLaunder = 0.1524 m
PS_SedLaunderStr = "SDR 41"
N_SedLaunderOrifices = 45
D_SedLaunderOrifice = 0.015875 m
L_SedLaunder = 4.9551 m
HL_SedLaunderOrifice = 0.0404807 m
B_SedLaunderOrificesEst = 0.1 m
B_SedLaunderOrifice = 0.104383 m
Pi_QLaunderOrifices = 0.8
# Inlet manifold
ND_SedManifold = 0.2032 m
PS_SedManStr = "SDR 41"
ND_SedDiffuser = 0.0254 m
PS_SedDiffuserStr = "SDR 26"
ND_SedJetReverser = 0.0762 m
PS_SedJetReverserStr = "SDR 26"
L_SedManifoldDiffuser = 0.15 m
N_SedManifoldPorts = 77
ED_SedInlet = 0.133503 m^2/s^3
Q_SedManifoldPort = 6.49351e-5 m^3/s
D_SedManifoldPort = 0.03175 m
B_SedDiffuser = 0.06 m
L_SedManHorizPipe2 = 4.65306 m
W_SedDiffuserInner = 0.003175 m
H_JetReverserToDiffusers = 0.03 m
HL_SedDiffuser = 0.0062888 m
# Plate settlers
L_SedActiveEst = 4.71698 m
L_SedPlate = 0.5 m
W_SedPlate = 1.06 m
T_SedPlate = 0.002 m
B_SedPlate = 0.027 m  # center to center distance between lamella
S_SedPlate = 0.025 m  # spacing between lamella
N_SedPlates = 162  # Number of plates per sedimentation tank
N_SedPlatesTotal = 486  # Number of plates for the entire plant
N_SedModules = 18  # Number of modules per bay
N_SedModPlates = 9  # Number of plates per module
AN_SedPlate = 1.0472
ND_SedMod = 0.0127 m
PS_SedModStr = "SDR 13.5"
ND_SedModSpacer = 0.01905 m
PS_SedModSpacerStr = "SDR 17"
ND_SedPlateFrame = 0.0381 m
PS_SedPlateFrameStr = "SDR 26"
ND_SedHopperDrain = 0.0254 m
PS_SedHopperDrainStr = "SDR 26"
ND_SedToFiPipe = 0.1524 m
PS_SedToFiPipeStr = "SDR 41"
# Rapid sand filter variables displayed
# General parameters
Q_Fi = 0.003 m^3/s
N_Fi = 5
V_FiLayer = 0.00183333 m/s
V_FiBw = 0.011 m/s
HL_FiTerminal = 0.654353 m
HL_FiBwInitiation = 1.41786 m
HL_FiBwTotalSS = 1.68125 m
HL_FiCleanPath = 0.128249 m
ND_FiPipe = 0.6096 m
# Filter box
H_Fi =  # error
L_Fi = 1.238 m
W_FiMin =  # error
W_Fi = 1.32 m
T_FiWall = 0.25 m
N_FiLayer = 6
H_FiLayer =  # error
H_FiBottomLayer =  # error
H_FiSand =  # error
# Auxiliary boxes
L_FiEntrance =  # error
W_FiEntrance = 0.928 m
H_FiEntrance =  # error
L_FiExit = 0.518 m
W_FiOverflow = 0.284 m
L_FiOverflow = 0.666 m
W_FiInletChannel = 0.335744 m
L_FiInletChannel = 7.56316 m
H_FiInletChannel = 0.5 m
# Pipe diameters
ND_FiBwTrunkMax =  # error
ND_FiTrunkMax = 0.1524 m
ND_FiTrunk =  # error
PS_FiTrunkStr =  # error
ND_FiBwTrunk =  # error
PS_FiInletOutletStr =  # error
PS_FiBwInletStr =  # error
ND_FiSandOutlet = 0.0508 m
PS_FiSandOutletStr =  # error
ND_FiSiphonAirValve =  # error
ND_FiSiphon = 0.203 m
PS_FiSiphonStr =  # error
ND_FiTrunkFlushValve =  # error
ND_FiBwTrunkFlushValve =  # error
ND_FiExitWaste =  # error
PS_FiExitWasteStr =  # error
ND_FiEntOverflow =  # error
PS_FiEntOverflowStr =  # error
ND_FiInletChannelDrain = 0.0762 m
ND_FiManBranch = 0.0254 m
ND_FiBwManBranch = 0.0381 m
PS_FiBranchStr =  # error
ND_FiBranchHolder = 0.0508 m
PS_FiBranchHolderStr =  # error
ND_FiBypass = 0.1524 m
PS_FiBypassStr =  # error
# Siphon manifold
B_FiSiphonManOrifices =  # error
N_FiSiphonManOrifices =  # error
D_FiSiphonManOrifices =  # error
HL_FiSiphonMax = 0.35 m
# Manifolds
Pi_FiManifoldQ = 0.85
PR_FiManBranchEst =  # error
N_FiManBranch =  # error
B_FiManifoldBranch = 0.1 m
L_FiBwManBranch =  # error
L_FiManBranch =  # error
L_FiManBranchExt = 0.02 m
HL_FiBwSlotsEst = 0.0327852 m
A_FiBwManOrificesEst =  # error
N_FiBwManOrifices =  # error
N_FiBwManOrificesPerBranch =  # error
D_FiBwManOrifice =  # error
B_FiBwManOrifice =  # error
HL_FiBwManOrifice =  # error
HL_FiBwManOrificeForward =  # error
PR_FiBwManTotal =  # error
N_FiInletManOrifices =  # error
N_FiInletManOrificesPerBranch =  # error
D_FiInletManOrifice =  # error
B_FiManOrificeEst =  # error
B_FiInletManOrifice =  # error
HL_FiInletManOrificeForward =  # error
N_FiTopManOrifices =  # error
N_FiTopManOrificesPerBranch =  # error
D_FiTopManOrifice =  # error
B_FiTopManOrifice =  # error
HL_FiTopManOrificeForward =  # error
L_FiOutletBranchSlotted =  # error
N_FiSlotRows = 2
W_FiManSlots = 0.0002032 m
B_FiManSlot = 0.0015875 m
N_FiOutletManSlotsPerRow =  # error
N_FiOutletManSlotsPerBranch =  # error
L_FiOutletManSlotCurvedInner =  # error
A_FiOutletManSlots =  # error
# Inlet weirs
Pi_QFiBw = 1.1
H_FiStopGate = 0.1 m
W_FiStopGate = 0.492083 m
W_FiBwFlowControl = 0.0185569 m
H_FiFlowControlSlotTotal =  # error
H_FiSlotStopper = 0.02 m
N_FiSlotStopper = 3
Q_FiSlotStopperIncrement =  # error
HL_FiBwFlowControlSlot =  # error
HL_FiOpenWeirMax = 0.0005 m
# Sand
D_FiSandES = 0.0005 m
Pi_UCFiSand = 1.65
D_FiSand60 = 0.000825 m
ε_FiSand = 0.4
Vol_FiSand =  # error
k_Kozeny = 5
Rho_FiSand = 2650 kg/m^3
## Display AC variables
AC_EntranceTank = [
    "-layer m EtCon";
    "c t 132,132,132";
    "EtCon";
    "  ";
    "_-view o t _zoom w -4.3876,4.15,0.15 -5.43179,5,2.67625";
    "_box -4.5476,4.31,0.15 -5.27179,4.84,2.67625 _box -4.3976,4.16,0 -5.42179,4.99,2.67625";
    "_subtract -4.3976,4.16,0  -4.5476,4.31,0.15 ";
    "_-view o t _zoom w -3.80979,4.15,2.1338 -4.5576,5,2.67625";
    "_box -3.96979,4.31,2.1338 -4.3976,4.84,2.67625 _box -3.81979,4.16,1.9838 -4.5476,4.99,2.67625";
    "_subtract -3.81979,4.16,1.9838  -3.96979,4.31,2.1338 "
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]
AC_FlocTank =  # no stored result
AC_OperatorAccess =  # error
AC_SedTank =  # no stored result
AC_ChemTanks =  # no stored result
AC_Filter =  # no stored result
AC_SectionCuts =  # error
AC_Cdc =  # no stored result
AI_EtFlocSedFi = [
    "laythw"; "_-view o t"; "-plot y "; "PublishToWeb PNG.pc3"; "User 1 (824.00 x 583.00 Pixels)"; "l n e F"; ""; " ."; "y  [FILEPATH]EtFlocSedFi_t"; "n y"
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]
AI_EtFlocSedFiEt = [
    "-group c * y "; "all "; "-layer s 0"; "  "; "-layer f *"; "  "; "-layer t Et*"; "  "; "-layer s Et*"; "  "
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]
AI_EtFlocSedFiFloc = [
    "-group c * y "; "all "; "-layer s 0"; "  "; "-layer f *"; "  "; "-layer t Floc*"; "  "; "-layer s Floc*"; "  "
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]
AI_EtFlocSedFiSed = [
    "-group c * y "; "all "; "-layer s 0"; "  "; "-layer f *"; "  "; "-layer t Sed*"; "  "; "-layer s Sed*"; "  "
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]
AI_EtFlocSedFiFilter = [
    "-group c * y "; "all "; "-layer s 0"; "  "; "-layer f *"; "  "; "-layer t Fi*"; "  "; "-layer s Fi*"; "  "
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]
AI_EtFlocSedFiOp = [
    "-group c * y "; "all "; "-layer s 0"; "  "; "-layer f *"; "  "; "-layer t Op*"; "  "; "-layer s Op*"; "  "
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]
AI_EtFlocSedFiIsoX = ["shademode x"; "-group c * y "; "all "; "-layer s 0"; "  "; "-layer f *"; "  "; "-layer t *"; "  "; "-layer s *"; "  "; " "; "_-view se"; "-plot y "; "PublishToWeb PNG.pc3"; "User 1 (824.00 x 583.00 Pixels)"; "l n e F"; ""; " ."; "y  [FILEPATH]EtFlocSedFiFull_se"; "n y"]
AI_EtFlocSedFiCdc = [
    "-group c * y "; "all "; "-layer s 0"; "  "; "-layer f *"; "  "; "-layer t Cdc*"; "  "; "-layer s Cdc*"; "  "
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]
# Added 2/5/16 by mrf222
AI_Final = ["-view"; "swiso"; ""; "laythw"; "-view"; "o"; "t"]
# [reference: StackedRapidSandFilter.xmcd]
# [reference: StackedRapidSandFilterAC.xmcd]
