# Flocculator Modular Design
Floc_Origin := [Plant_Origin[0]; Plant_Origin[1] + N_SedTanks*(W_Sed + T_PlantWall); Plant_Origin[2] + Z_FlocTank]  # error: This variable is undefined.
# User Inputs
Q_Plant := 20*L/s  # To be left undefined and inputed online by the user
method := "Flocculator"
L_Sed := 7.55 m  # Length of the Flocculator, defined by user
HW_Sed := 1.961 m  # Height of Flocculator, defined by user
Z_SedWeirExit := 1.899 m
W_SedInletChannelPreWeir := .4 m
Z_SedChannelBottom := 1.665 m
# Needed from outside code/Possible User Inputs
# From Expert Inputs
N_SedBays :=
    1 if Q_Plant ≤ 29*L/s
    2 otherwise
N_SedTanks :=
    1 if Q_Plant ≤ 3*L/s
    2 if Q_Plant ≤ 6*L/s and Q_Plant > 3*L/s
    3 if Q_Plant ≤ 58*L/s and Q_Plant > 6*L/s
    4 if Q_Plant ≤ 78*L/s and Q_Plant > 58*L/s
    5 if Q_Plant ≤ 97*L/s and Q_Plant > 78*L/s
    6 if Q_Plant ≤ 117*L/s and Q_Plant > 97*L/s
    7 if Q_Plant ≤ 136*L/s and Q_Plant > 117*L/s
    8 if Q_Plant ≤ 156*L/s and Q_Plant > 136*L/s
    9 if Q_Plant ≤ 175*L/s and Q_Plant > 156*L/s
    10 if Q_Plant ≤ 195*L/s and Q_Plant > 175*L/s
    11 if Q_Plant ≤ 214*L/s and Q_Plant > 195*L/s
# Redefined for this modular code!
ND_RMPipe :=
    (.102 m) if Q_Plant ≤ 4*L/s
    (.152 m) if Q_Plant ≤ 10*L/s and Q_Plant > 4*L/s
    (.203 m) if Q_Plant ≤ 17*L/s and Q_Plant > 10*L/s
    (.254 m) if Q_Plant ≤ 27*L/s and Q_Plant > 17*L/s
    (.305 m) if Q_Plant ≤ 38*L/s and Q_Plant > 27*L/s
    (.381 m) if Q_Plant ≤ 54*L/s and Q_Plant > 38*L/s
    (.508 m) if Q_Plant ≤ 96*L/s and Q_Plant > 54*L/s
    .61 m otherwise
W_Sed :=
    (1.067 m) if Q_Plant ≤ 29*L/s
    (2.134 m) otherwise
Country := 0
Language := 0
# Tabulated Constants
E_Pvc := 0.12 mm
Nu_Water := 1*10^-6*m^2/s  # The kinematic viscosity of water.
Pi_Jet := 0.4
Pi_VenaContractaOrifice := 0.63
E_Concrete := 2 mm
# General Assumptions and Constants
T_PlantWall := 15 cm
W_HumanMin := 0.54 m
S_Fitting := 5 cm  # minimum space between fittings in a tank or fittings and the wall of the tank.
W_ChannelMin := 15 cm  # Minimum channel width for constructability
HL_ChannelMax := 5 cm
H_PlantFreeboard := 0.1*m
T_ConcreteMin := 5 cm
USD := ¤
Lem := USD/19.06
ND_SpacerPipe := 3/4*in
# Entrance Tank
L_FlocCouplingExt := 5 cm
T_RMOrificePlate := 2 cm
E_MaxRM := 1*W/kg
# Flocculator
Pi_JSOptimal := 3
Pi_JSMin := 2
ED_Floc := 10.5*mW/kg
# Increased from 6 to 10 on 7/14/2011 to compensate for increase in Pi.Jet from 0.38 (in flocculator) and 0.34 (in ports, pipes, channels) to a new value of 0.4.
Pi_FlocBaffleMin := 1
Pi_FlocBaffleMax := 1.5
# increased to 100 at the request of Dan and Sarah
CP_Floc := 75 m^(2/3)  # value decreased 1/26/12
T_FlocBaffleRigidH := 15 cm
T_FlocBaffleRigidV := 5 cm
H_FlocOption := 0
# The minor loss coefficient is 2. According to measurements at Agalteca and according to
# https://confluence.cornell.edu/display/AGUACLARA/PAHO+Water+Treatment+Publications (page 100 in chapter on flocculation)
K_FlocBaffle := 2.5
# Increased both to provide a safety margin on flocculator head loss and to simultaneously scale back on the actual collision potential we are trying to achieve.
Ti_FlocDrain := 30 min
S_FlocBaffleSetBackPlastic := 2 cm
ND_FlocModulesMain := 1/2*in
ND_FlocModulesLarge := 1.5 in
# Sedimentation Tank
B_SedLaunderOrificesEst := 10 cm
ED_SedInlet := ED_Floc
T_SedWeir := 4 cm
HL_SedLaunderBod := 4 cm
V_SedUpBod := 1*mm/s
W_SedPlate := 42 in
W_SedBay := W_SedPlate
W_Plastic := W_SedPlate
T_SedPlate := 0.2 cm
Pi_QLaunderOrifices := 0.80
HL_SedWeirMax := 5 cm
Perpendicular_Weir := 0
Parallel_Weir := 1
L_SedLaunderCapExcess := 3 cm
S_SedPlateMin := 2.5 cm
AN_SedPlate := 60 deg
L_SedPlateCantilevered := 20 cm
# Stacked Rapid Sand Filter
HL_FiEntrancePipeMax := 10 cm
# Minor Loss Coefficients
# Individual K Values
K_PipeExit := 1
K_PipeEnt := 0.5
K_El90 := 0.9
K_GateValve := 0.39
K_Exp := 1
# Wall Thicknesses
T_ChannelWall := T_PlantWall
# Operator Access
W_DCWalkway := 1 m
# Preliminary Design References
# [reference: MathFunctions.xmcd]
# [reference: PipeDatabase.xmcd]
# [reference: FluidsFunctions.xmcd]
# [reference: Flocculator.xmcd]
# [reference: MtoATranslators.xmcd]
# [reference: MtoATranslatorsWrapped.xmcd]
# [reference: PlumbingF.xmcd]
# [reference: TankF.xmcd]
# From Flocculator Design Code
Floc_Origin := [0 m; 0 m; 0 m]
Plant_Origin[0] := Floc_Origin[0]
Plant_Origin[1] := Floc_Origin[1] - N_SedTanks*(W_Sed + T_PlantWall) = -3.651 m
Q_MinHorizontal(HW_FlocEnd, S_FlocBaffleMin, Pi_JSOptimal, ED_Floc, J_Min) = 200.659 L/s
T_FlocBaffleRigidV if (EN_FlocHoriz == 0) and (W_FlocChannelMinRigidBaffleV > W_FlocChannelPlasticBaffleV)
S_FlocBaffleV :=
    for i ∈ 0 .. N_FlocChannelsV - 1
        S[i] ← S_FlocV
    S
N_FlocChannelSpacesV :=
    for i ∈ 0 .. N_FlocChannelsV - 1
        N_Spaces[i] ← N_FlocChannelSpacesVF(ED_Floc, Q_Plant, W_FlocChannelV, L_Sed, T_FlocBaffle, HW_FlocEnd) - ((N_SedTanks == 1 and N_SedBays == 1) == 0)*(i == (N_FlocChannelsV - 1))*(ceil((W_SedInletChannelPreWeir + S_FlocPortGap)/S_FlocV) - (mod(ceil((W_SedInletChannelPreWeir + S_FlocPortGap)/S_FlocV), 2) == 0))
    N_Spaces
    = [24; 23]
N_FlocChannelBafflesV := N_FlocChannelSpacesV - 1 = [23; 22]
N_FlocChannelSpacesH :=
    for i ∈ 0 .. N_FlocChannelsH - 1
        Spaces[i] ← N_FlocSpacesPerChannelH - (i == (N_FlocChannelsH - 1))*Ceil(W_SedInletChannelPreWeir/S_FlocBaffleCalcH, 2)
    return Spaces
S_FlocBaffleH :=
    for i ∈ 0 .. N_FlocChannelsH - 1
        Local[i] ← SofN_FlocBaffleF(L_Sed, T_FlocBaffleRigidH, N_FlocChannelSpacesH[0])
    return Local
N_FlocChannelBaffles :=
    N_FlocChannelBafflesV if EN_FlocHoriz == 0
    N_FlocChannelBafflesH otherwise
H_FlocPort :=
    for i ∈ 0 .. N_FlocChannels - 1
        H_Port[i] ←
            (Pi_FlocBaffle*S_FlocV*W_FlocChannel/(S_FlocV - S_FlocPortGap)) if EN_FlocHoriz == 0
            H_Floc otherwise
    H_Port
W_FlocPort :=
    for i ∈ 0 .. N_FlocChannels - 2
        W_Port[i] ← S_FlocBaffle[0] - S_FlocPortGap
    W_Port[N_FlocChannels - 1] ← W_SedInletChannelPreWeir
    W_Port
    = [0.292667; 0.4] m
N_FlocBaffleLowerV :=
    for i ∈ 0 .. N_FlocChannelsV - 1
        N_FlocBaffleLowerV[i] ← floor((N_FlocChannelBafflesV[i] + 1)/2)
    return N_FlocBaffleLowerV
    = [12; 11]
N_FlocBaffleUpperV :=
    for i ∈ 0 .. N_FlocChannelsV - 1
        N_FlocBaffleUpperV[i] ← (N_FlocChannelBafflesV[i] - N_FlocBaffleLowerV)[i]
    return N_FlocBaffleUpperV
    = [11; 11]
N_FlocBaffleLowerTotalV + N_FlocBaffleUpperTotalV + N_FlocChannelsV = 47
X_FlocBaffles :=
    for channel ∈ 0 .. N_FlocChannels - 2
        for i ∈ 0 .. N_FlocChannelBaffles[channel] - 1
            x[i, channel] ← S_FlocBaffle[channel] + B_FlocBaffle[channel]*i
    for i ∈ 0 .. N_FlocChannelBaffles[N_FlocChannels - 1] - 1
        x[i, N_FlocChannels - 1] ← B_FlocBaffle[N_FlocChannels - 1]*i + (L_Sed - B_FlocBaffle[N_FlocChannels - 1]*N_FlocChannelBaffles[N_FlocChannels - 1])
    return x
Y_FlocBafflesH :=
    if EN_FlocHoriz == 1
        if mod(N_FlocChannels, 2) == 0
            for i ∈ 0 .. (N_FlocChannels - 1)
                for j ∈ 0 .. N_FlocChannelBaffles[i] - 1
                    Y_FlocBaffles[j, i] ← (Plant_Origin[1] + (N_SedTanks*(W_Sed + T_PlantWall)) + ((N_FlocChannels - i - 1)*(W_FlocChannel + T_PlantWall))) + mod(j, 2)*S_FlocBaffle[0] if mod(i, 2) == 1
                    Y_FlocBaffles[j, i] ← (Plant_Origin[1] + (N_SedTanks*(W_Sed + T_PlantWall)) + ((N_FlocChannels - i - 1)*(W_FlocChannel + T_PlantWall))) + mod(j + 1, 2)*S_FlocBaffle[0] otherwise
            Y_FlocBaffles[j, i]
        otherwise
            for i ∈ 0 .. (N_FlocChannels - 1)
                for j ∈ 0 .. N_FlocChannelBaffles[i] - 1
                    Y_FlocBaffles[j, i] ← (Plant_Origin[1] + (N_SedTanks*(W_Sed + T_PlantWall)) + ((N_FlocChannels - i - 1)*(W_FlocChannel + T_PlantWall))) + mod(j, 2)*S_FlocBaffle[0] if mod(i + 1, 2) == 1
                    Y_FlocBaffles[j, i] ← (Plant_Origin[1] + (N_SedTanks*(W_Sed + T_PlantWall)) + ((N_FlocChannels - i - 1)*(W_FlocChannel + T_PlantWall))) + mod(j + 1, 2)*S_FlocBaffle[0] otherwise
            Y_FlocBaffles[j, i]
    return Y_FlocBaffles
Plant_Origin[1] = -3.651 m
Y_FlocBafflesV :=
    if EN_FlocHoriz == 0
        for j ∈ 0 .. (N_FlocChannels - 1)
            Y_FlocBaffles[0, j] ← Plant_Origin[1] + (N_SedTanks*(W_Sed + T_PlantWall)) + ((N_FlocChannels - j - 1)*(W_FlocChannel + T_PlantWall))
    return Y_FlocBaffles
Y_FlocBaffles :=
    Y_FlocBaffles ← Y_FlocBafflesH if EN_FlocHoriz == 1
    Y_FlocBaffles ← Y_FlocBafflesV otherwise
Channels := 0 .. N_FlocChannels - 1
Z_FlocBafflesH :=
    if EN_FlocHoriz == 1
        for channel ∈ Channels
            for i ∈ 0 .. N_FlocChannelBaffles[channel] - 1
                z[i, channel] ← 0 m
    return z
Channelsnew := 0 .. N_FlocChannels - 2
Z_FlocBafflesV :=
    if EN_FlocHoriz == 0
        for channel ∈ Channelsnew
            for i ∈ 0 .. N_FlocChannelBaffles[channel] - 1
                z[i, channel] ← mod(i, 2)*S_FlocBaffle[channel]*Pi_FlocBaffle
        for i ∈ 0 .. N_FlocChannelBaffles[N_FlocChannels - 1] - 1
            z[i, N_FlocChannels - 1] ← mod(i + 1, 2)*S_FlocBaffle[channel]*Pi_FlocBaffle
    return z
Z_FlocBaffles :=
    Z_FlocBaffles ← Z_FlocBafflesH if EN_FlocHoriz == 1
    Z_FlocBaffles ← Z_FlocBafflesV otherwise
L_FlocBafflesH :=
    if EN_FlocHoriz == 1
        for channel ∈ Channels
            for i ∈ 0 .. N_FlocChannelBaffles[channel] - 1
                l[i, channel] ← L_FlocBaffleLower
    return l
L_FlocBafflesV :=
    if EN_FlocHoriz == 0
        for channel ∈ Channels
            for i ∈ 0 .. N_FlocChannelBaffles[channel] - 1
                l[i, channel] ← L_FlocBaffleUpper if mod(i, 2) == 1
                l[i, channel] ← L_FlocBaffleLower otherwise
        for i ∈ 0 .. N_FlocChannelBaffles[last(N_FlocChannelBaffles)] - 1
            l[i, N_FlocChannels - 1] ← L_FlocBaffleLower if mod(i, 2) == 1
            l[i, N_FlocChannels - 1] ← L_FlocBaffleUpper otherwise
    return l
L_FlocBaffles :=
    L_FlocBaffles ← L_FlocBafflesH if EN_FlocHoriz == 1
    L_FlocBaffles ← L_FlocBafflesV otherwise
Y_FlocDrainValves :=
    for i ∈ 0 .. ceil(N_FlocChannels/2) - 1
        y[i] ← Plant_Origin[1] + N_SedTanks*(W_Sed + T_PlantWall) + 0.5*W_FlocChannel + 2*(W_FlocChannel + T_PlantWall)*i
    y
N_FlocValves := length(Y_FlocDrainValves) = 1
ModuleProperties :=
    for i ∈ 0 .. last(N_FlocChannelBaffles)
        N_FlocBafflesLong[i] ← max(2*floor((L_FlocModuleTarget/B_FlocBaffle[i] + 1)/2), 1)
        N_FlocLongModule[i] ← floor(N_FlocChannelBaffles[i]/N_FlocBafflesLong[i])
        N_FlocBafflesShort[i] ← N_FlocChannelBaffles[i] - N_FlocBafflesLong[i]*N_FlocLongModule[i]
    return [N_FlocBafflesLong, N_FlocLongModule, N_FlocBafflesShort]
N_FlocChannelBafflesLong := ModuleProperties[0, 0] = [4; 4]
N_FlocChannelModulesLong := ModuleProperties[0, 1] = [5; 5]
N_FlocChannelBafflesShort := ModuleProperties[0, 2] = [3; 2]
L_FlocModuleLong :=
    for i ∈ 0 .. last(N_FlocChannelBafflesLong)
        L_ModuleLong[i] ← (N_FlocChannelBafflesLong[i] - 1)*B_FlocBaffle[i] + SocketDepth(ND_FlocModulesMain) - CapThickness(ND_FlocModulesMain)
    return L_ModuleLong
L_FlocModuleLongOuter :=
    for i ∈ 0 .. last(N_FlocChannelBafflesLong)
        L_ModuleLong[i] ← (N_FlocChannelBafflesLong[i] - 2)*B_FlocBaffle[i] + SocketDepth(ND_FlocModulesMain) - CapThickness(ND_FlocModulesMain)
    return L_ModuleLong
L_FlocModuleShort :=
    for i ∈ 0 .. last(N_FlocChannelBafflesShort)
        ModuleLengthShort[i] ← 0 if N_FlocChannelBafflesShort[i] == 0
        ModuleLengthShort[i] ← X_FlocBaffles[0, 0] - CapThickness(ND_FlocModulesMain) if N_FlocChannelBafflesShort[i] == 1
        ModuleLengthShort[i] ← B_FlocBaffle[i]*(N_FlocChannelBafflesShort[i] - 1) + SocketDepth(ND_FlocModulesMain) - CapThickness(ND_FlocModulesMain) otherwise
    return ModuleLengthShort
L_FlocModuleConnector :=
    for i ∈ 0 .. N_FlocChannels - 1
        L_Connector[i] ← S_FlocBaffle[i] - CouplingLength(1/2*in) + SocketDepth(1/2*in) - CapThickness(1.5 in)
    L_Connector
L_FlocModuleConnectorOuter :=
    for i ∈ 0 .. N_FlocChannels - 1
        L_Connector[i] ← 2*S_FlocBaffle[i] + T_FlocBaffle - CouplingLength(1/2*in) + SocketDepth(1/2*in) - CapThickness(1.5 in)
    L_Connector
S_ModulePipesH :=
    for i ∈ 0 .. N_FlocChannels - 1
        S[i] ← N_FlocChannelBafflesLong[i]*B_FlocBaffle[i]
    S
# From Flocculator Drawing Code
TotalFloc_Dim := [L_Sed; (N_FlocChannels*W_FlocChannel) + ((N_FlocChannels - 1)*T_PlantWall); H_Floc]
Wall_Dim := [TotalFloc_Dim[0] + 2*T_PlantWall; T_PlantWall; TotalFloc_Dim[2]]
FlocPort_Dim :=
    for i ∈ 0 .. (N_FlocChannels - 2)
        FlocPort_Dim[0, i] ← [W_FlocPort[N_FlocChannels - 2 - i]; T_PlantWall + 2*zc; (-H_FlocPort)[i]]
    return FlocPort_Dim
ChannelOpening_Dim := [W_SedInletChannelPreWeir; T_PlantWall; Z_FlocTank + H_Floc - Z_SedChannelBottom] = [0.4; 0.15; 0.461876] m
FlocDrainSlope_Dim :=
    [sqrt(3)*H_FlocSlope; -D_FlocValve; H_FlocSlope] if sqrt(3)*H_FlocSlope < W_FlocPort[0] + S_FlocPortGap - 5 cm
    [W_FlocPort[0] + S_FlocPortGap - 5 cm; -D_FlocValve; H_FlocSlope] otherwise
Port_Dim := [T_FlocBaffle + 2*zc; L_BafflePort + L_Slot; L_BafflePort]
BaffleSlot1_Dim := [T_FlocBaffle; W_FlocChannel + 2*L_Slot; H_Floc - Z_FlocBaffles[0, 0]]
BaffleSlot1Last_Dim := [T_FlocBaffle; W_FlocChannel + 2*L_Slot; H_Floc - Z_FlocBaffles[0, N_FlocChannels - 1]]
BaffleSlot2_Dim := [T_FlocBaffle; W_FlocChannel + 2*L_Slot; H_Floc - Z_FlocBaffles[1, 0]]
BaffleSlot2Last_Dim := [T_FlocBaffle; W_FlocChannel + 2*L_Slot; H_Floc - Z_FlocBaffles[1, N_FlocChannels - 1]]
Wall_Origin := [Floc_Origin[0] - TotalFloc_Dim[0] - T_PlantWall; Floc_Origin[1] + W_FlocChannel; Floc_Origin[2]]
FlocCoupling_Origin := [
    Floc_Origin[0] + ConRadius(ND_RMPipe) + S_Fitting - L_Sed;
    Floc_Origin[1] + N_FlocChannels*W_FlocChannel + T_PlantWall*(N_FlocChannels - 1) + SocketDepth(ND_RMPipe) - L_FlocCouplingExt;
    Floc_Origin[2] + outerradius(ND_RMPipe) + S_Fitting
]
FlocPort_Origin :=
    for i ∈ 0 .. (N_FlocChannels - 2)
        if mod(i, 2) == 1
            FlocPort_Origin[0, i] ← [
                Floc_Origin[0] - TotalFloc_Dim[0];
                Floc_Origin[1] + (W_FlocChannel*(1 + i)) + T_PlantWall*i - zc;
                Floc_Origin[2] + H_FlocPort[i]
            ]
        otherwise
            FlocPort_Origin[0, i] ← [
                Floc_Origin[0] - W_FlocPort[N_FlocChannels - 2 - i];
                Floc_Origin[1] + (W_FlocChannel*(1 + i)) + T_PlantWall*i - zc;
                Floc_Origin[2] + H_FlocPort[i]
            ]
    return FlocPort_Origin
ChannelOpening_Origin := [Floc_Origin[0] - L_Sed; Floc_Origin[1] - T_PlantWall; Z_SedChannelBottom] = [-7.55; -0.15; 1.665] m
LargeCap_Origin := [
    -CapThickness(1.5 in) + Floc_Origin[0] - L_Sed + X_FlocBaffles[0, 0];
    (Floc_Origin[1] + W_FlocChannel*N_FlocChannels + T_PlantWall*(N_FlocChannels - 1) - 2*S_Fitting);
    {
        (Floc_Origin[2] + L_FlocBaffleLower - 0.5*(L_FlocBaffleLower + L_FlocBaffleUpper - (H_Floc - 0.5*H_PlantFreeboard))) if EN_ModuleIdentical == 0
        (Floc_Origin[2] + 4*S_ModulePipesV + S_FlocBaffle[last(S_FlocBaffle)]*Pi_FlocBaffle - .05 m) otherwise
    }
] = [-7.24178; 1.27; 0.9805] m
LargeCapL_Origin := [
    -CapDiameter(1.5 in)/2 + outerradius(1.5 in) + Floc_Origin[0] - L_Sed + X_FlocBaffles[0, N_FlocChannels - 1] + B_FlocBaffle[0];
    Floc_Origin[1] + W_FlocChannel - 2*S_Fitting;
    Floc_Origin[2] + 4*S_ModulePipesV + S_FlocBaffle[last(S_FlocBaffle)]*Pi_FlocBaffle - .05 m
] = [-6.61244; 0.51; 1.442] m
FittedCap_Origin := LargeCap_Origin + [T_FlocBaffle + CapThickness(0.5 in) + CapThickness(1.5 in); 0 m; 0 m]
FittedCapL_Origin := LargeCapL_Origin + [
    T_FlocBaffle + CapDiameter(0.5 in)/2 - outerradius(0.5 in) + CapDiameter(1.5 in)/2 - outerradius(1.5 in);
    0 m;
    0 m
]
LongPipe_Origin := FittedCap_Origin + [L_FlocModuleLong[0]; 0 m; 0 m]
LongPipeL_Origin := FittedCapL_Origin + [L_FlocModuleLong[0]; 0 m; 0 m]
ModuleCoupling_Origin := LongPipe_Origin + [CouplingLength(0.5 in) - 2*SocketDepth(0.5 in); 0 m; 0 m]
ModuleCouplingL_Origin := LongPipeL_Origin + [CouplingLength(0.5 in) - 2*SocketDepth(0.5 in); 0 m; 0 m]
ConnectorPipe_Origin := ModuleCoupling_Origin + [L_FlocModuleConnector[0]; 0 m; 0 m]
ConnectorPipeL_Origin := ModuleCouplingL_Origin + [L_FlocModuleConnector[0]; 0 m; 0 m]
FlocAdapter1_Origin := [
    -L_Sed - CouplingLength(ND_FlocValve) - (max(T_PlantWall - CouplingLength(ND_FlocValve), 0 m) + SocketDepth(ND_FlocValve));
    Y_FlocDrainValves[0];
    Floc_Origin[2]
]
FlocValve_Origin := FlocAdapter1_Origin + [-MaleAdapterLength(ND_FlocValve) + SocketDepth(ND_FlocValve) + ValveSocket(ND_FlocValve); 0 m; 0 m]
FlocAdapter2_Origin := FlocValve_Origin + [
    -ValveLength(ND_FlocValve) + ValveSocket(ND_FlocValve) - MaleAdapterLength(ND_FlocValve) + SocketDepth(ND_FlocValve);
    0 m;
    0 m
]
FlocDrainNipple_Origin := FlocAdapter2_Origin
BaffleSlot1_Origin := [Floc_Origin[0] - L_Sed; -L_Slot; Floc_Origin[2]] + [X_FlocBaffles[0, 0]; Y_FlocBaffles[0, 0]; Z_FlocBaffles[0, 0]]
BaffleSlot1Last_Origin := [Floc_Origin[0] - L_Sed; -L_Slot; Floc_Origin[2]] + [
    X_FlocBaffles[0, N_FlocChannels - 1];
    Y_FlocBaffles[0, N_FlocChannels - 1];
    Z_FlocBaffles[0, N_FlocChannels - 1]
]
BaffleSlot2_Origin := [Floc_Origin[0] - L_Sed; -L_Slot; Floc_Origin[2]] + [X_FlocBaffles[1, 0]; Y_FlocBaffles[0, 0]; Z_FlocBaffles[1, 0]]
BaffleSlot2Last_Origin := [Floc_Origin[0] - L_Sed; -L_Slot; Floc_Origin[2]] + [
    X_FlocBaffles[1, N_FlocChannels - 1];
    Y_FlocBaffles[0, N_FlocChannels - 1];
    Z_FlocBaffles[1, N_FlocChannels - 1]
]
BafflePort1V_Origin := [Floc_Origin[0] - L_Sed - zc; W_FlocChannel - L_BafflePort; Floc_Origin[2]] + [X_FlocBaffles[0, 0]; Y_FlocBaffles[0, 0]; Z_FlocBaffles[0, 0]]
BafflePort1VLast_Origin := [Floc_Origin[0] - zc - L_Sed; W_FlocChannel - L_BafflePort; Floc_Origin[2]] + [
    X_FlocBaffles[N_FlocChannelBaffles[N_FlocChannels - 1] - 1, N_FlocChannels - 1];
    Y_FlocBaffles[0, N_FlocChannels - 1];
    Z_FlocBaffles[1, N_FlocChannels - 1]
]
BafflePort2V_Origin := [Floc_Origin[0] - L_Sed - zc; -L_Slot; Floc_Origin[2]] + [X_FlocBaffles[2, 0]; Y_FlocBaffles[0, 0]; Z_FlocBaffles[2, 0]]
BafflePort2VLast_Origin := [Floc_Origin[0] - zc - L_Sed; -L_Slot; Floc_Origin[2]] + [
    X_FlocBaffles[N_FlocChannelBaffles[N_FlocChannels - 1] - 3, N_FlocChannels - 1];
    Y_FlocBaffles[0, N_FlocChannels - 1];
    Z_FlocBaffles[3, N_FlocChannels - 1]
]
FlocTankLayer := layer_new("FlocTankCon", grey)
DrawFlocTank := Tank(Floc_Origin, TotalFloc_Dim, T_PlantWall)
DrawFlocWall := BoxF(Wall_Origin, Wall_Origin + Wall_Dim, [0; 0; 0]*deg)
ArrayFlocWall := ArrayLast(N_FlocChannels - 1, 1, W_FlocChannel + T_PlantWall)
FlocChannelPorts :=
    Local ← FreezeLayer("FlocTankCon")
    for i ∈ 0 .. (N_FlocChannels - 2)
        Local ← stack(Local, BoxF(FlocPort_Origin[0, i], FlocPort_Origin[0, i] + FlocPort_Dim[0, i], [0; 0; 0]*deg))
ChannelOpening := BoxF(ChannelOpening_Origin, ChannelOpening_Origin + ChannelOpening_Dim, [0; 0; 0]*deg)
DrawBaffleSlot1 := BoxF(BaffleSlot1_Origin, BaffleSlot1_Origin + BaffleSlot1_Dim, [0; 0; 0]*deg)
DrawBaffleSlot1Last := BoxF(BaffleSlot1Last_Origin, BaffleSlot1Last_Origin + BaffleSlot1Last_Dim, [0; 0; 0]*deg)
DrawBaffleSlot2 := BoxF(BaffleSlot2_Origin, BaffleSlot2_Origin + BaffleSlot2_Dim, [0; 0; 0]*deg)
DrawBaffleSlot2Last := BoxF(BaffleSlot2Last_Origin, BaffleSlot2Last_Origin + BaffleSlot2Last_Dim, [0; 0; 0]*deg)
ArrayBaffleSlot1 := ArrayMultiple([BaffleSlot1_Origin], N_FlocChannels - 1, ceil(N_FlocChannelBaffles[0]/2), -W_FlocChannel - T_PlantWall, 2*B_FlocBaffle[0])
ArrayBaffleSlot2 := ArrayMultiple([BaffleSlot2_Origin], N_FlocChannels - 1, floor(N_FlocChannelBaffles[0]/2), -W_FlocChannel - T_PlantWall, 2*B_FlocBaffle[0])
ArrayBaffleSlot1Last := ArrayMultiple([BaffleSlot1Last_Origin], 1, ceil(N_FlocChannelBaffles[N_FlocChannels - 1]/2), -W_FlocChannel - T_PlantWall, 2*B_FlocBaffle[N_FlocChannels - 1])
ArrayBaffleSlot2Last := ArrayMultiple([BaffleSlot2Last_Origin], 1, floor(N_FlocChannelBaffles[N_FlocChannels - 1]/2), -W_FlocChannel - T_PlantWall, 2*B_FlocBaffle[N_FlocChannels - 1])
Wedge1 := WedgeF([
    Plant_Origin[0] - L_Sed;
    Y_FlocDrainValves[0] + 0.5*D_FlocValve + FlocDrainSlope_Dim[1];
    Floc_Origin[2] - 0.5*D_FlocValve + FlocDrainSlope_Dim[2]
], [
    Plant_Origin[0] - L_Sed + FlocDrainSlope_Dim[0];
    Y_FlocDrainValves[0] + 0.5*D_FlocValve;
    Floc_Origin[2] - 0.5*D_FlocValve
], [0; 0; 0]*deg)
ArrayWedge := ArrayLast(last(Y_FlocDrainValves) + 1, 1, 2*W_FlocChannel + 2*T_PlantWall)
GroupFlocSubtractionPieces := GroupAll("DeleteMe")
SubtractFlocTankPieces := SubtractF(["FlocTankCon"], "DeleteMe")
FlocTankScript :=
    stack(FlocTankLayer, DrawFlocTank, DrawFlocWall, ArrayFlocWall, FlocChannelPorts, ChannelOpening, Wedge1, ArrayWedge, GroupFlocSubtractionPieces, SubtractFlocTankPieces) if L_Slot == 0
    stack(FlocTankLayer, DrawFlocTank, DrawFlocWall, ArrayFlocWall, FlocChannelPorts, ChannelOpening, DrawBaffleSlot1, DrawBaffleSlot2, DrawBaffleSlot1Last, DrawBaffleSlot2Last, ArrayBaffleSlot1, ArrayBaffleSlot2, ArrayBaffleSlot1Last, ArrayBaffleSlot2Last, sp, Wedge1, ArrayWedge, GroupFlocSubtractionPieces, SubtractFlocTankPieces) otherwise
FlocBaffleLayerV := layer_new("FlocModBaffles", ltpurple)
DrawLowerBaffleV := BoxF([Floc_Origin[0] - L_Sed; -L_Slot; Floc_Origin[2]] + [X_FlocBaffles[0, 0]; Y_FlocBaffles[0, 0]; Z_FlocBaffles[0, 0]], [Floc_Origin[0] - L_Sed; -L_Slot; Floc_Origin[2]] + [X_FlocBaffles[0, 0]; Y_FlocBaffles[0, 0]; Z_FlocBaffles[0, 0]] + [T_FlocBaffle; W_FlocChannel + 2*L_Slot; L_FlocBaffles[0, 0]], [0; 0; 0]*deg)
ArrayLowerBaffleV := ArrayLast(1, ceil(N_FlocChannelBaffles[0]/2), 2*B_FlocBaffle[0])
DrawUpperBaffleV := BoxF([Floc_Origin[0] - L_Sed; -L_Slot; Floc_Origin[2]] + [X_FlocBaffles[1, 0]; Y_FlocBaffles[0, 0]; Z_FlocBaffles[1, 0]], [Floc_Origin[0] - L_Sed; -L_Slot; Floc_Origin[2]] + [X_FlocBaffles[1, 0]; Y_FlocBaffles[0, 0]; Z_FlocBaffles[1, 0]] + [T_FlocBaffle; W_FlocChannel + 2*L_Slot; L_FlocBaffles[1, 0]], [0; 0; 0]*deg)
ArrayUpperBaffleV := ArrayLast(1, {
    ceil(N_FlocChannelBaffles[0]/2) if N_SedTanks == 1 and N_SedBays == 1
    floor(N_FlocChannelBaffles[0]/2) otherwise
}, 2*B_FlocBaffle[0])
ArrayBafflesChannelV := array_all(N_FlocChannels - 1, 1, -W_FlocChannel - T_PlantWall)
DrawLastLowerBaffleV := BoxF([Floc_Origin[0] - L_Sed; -L_Slot; Floc_Origin[2]] + [
    X_FlocBaffles[N_FlocChannelBaffles[N_FlocChannels - 1] - 1, N_FlocChannels - 1];
    Y_FlocBaffles[0, N_FlocChannels - 1];
    Z_FlocBaffles[1, N_FlocChannels - 1]
], [Floc_Origin[0] - L_Sed; -L_Slot; Floc_Origin[2]] + [
    X_FlocBaffles[N_FlocChannelBaffles[N_FlocChannels - 1] - 1, N_FlocChannels - 1];
    Y_FlocBaffles[0, N_FlocChannels - 1];
    Z_FlocBaffles[1, N_FlocChannels - 1]
] + [-T_FlocBaffle; W_FlocChannel + 2*L_Slot; L_FlocBaffles[1, N_FlocChannels - 1]], [0; 0; 0]*deg)
ArrayLastLowerBaffleV := ArrayLast(1, floor(N_FlocChannelBaffles[last(N_FlocChannelBaffles)]/2), -(2*B_FlocBaffle[0]))
DrawLastUpperBaffleV := BoxF([Floc_Origin[0] - L_Sed; -L_Slot; Floc_Origin[2]] + [
    X_FlocBaffles[N_FlocChannelBaffles[N_FlocChannels - 1] - 2, N_FlocChannels - 1];
    Y_FlocBaffles[0, N_FlocChannels - 1];
    Z_FlocBaffles[0, N_FlocChannels - 1]
], [Floc_Origin[0] - L_Sed; -L_Slot; Floc_Origin[2]] + [
    X_FlocBaffles[N_FlocChannelBaffles[N_FlocChannels - 1] - 2, N_FlocChannels - 1];
    Y_FlocBaffles[0, N_FlocChannels - 1];
    Z_FlocBaffles[0, N_FlocChannels - 1]
] + [-T_FlocBaffle; W_FlocChannel + 2*L_Slot; L_FlocBaffles[0, N_FlocChannels - 1]], [0; 0; 0]*deg)
ArrayLastUpperBaffleV := ArrayLast(1, floor(N_FlocChannelBaffles[last(N_FlocChannelBaffles)]/2), -(2*B_FlocBaffle[0]))
FreezeBafflesV := FreezeLayer("FlocModBaffles")
DrawBafflePort1V := BoxF(BafflePort1V_Origin, BafflePort1V_Origin + Port_Dim, [0; 0; 0]*deg)
DrawBafflePort1VLast := BoxF(BafflePort1VLast_Origin, BafflePort1VLast_Origin + Port_Dim, [0; 0; 0]*deg)
DrawBafflePort2V := BoxF(BafflePort2V_Origin, BafflePort2V_Origin + Port_Dim, [0; 0; 0]*deg)
DrawBafflePort2VLast := BoxF(BafflePort2VLast_Origin, BafflePort2VLast_Origin + Port_Dim, [0; 0; 0]*deg)
ArrayPort1V := ArrayMultiple([BafflePort1V_Origin], N_FlocChannels - 1, ceil(N_FlocChannelBaffles[0]/4), -W_FlocChannel - T_PlantWall, 4*B_FlocBaffle[0])
ArrayPort2V := ArrayMultiple([BafflePort2V_Origin], N_FlocChannels - 1, ceil((N_FlocChannelBaffles[0] - 2)/4), -W_FlocChannel - T_PlantWall, 4*B_FlocBaffle[0])
ArrayPort1VLast := ArrayMultiple([BafflePort1VLast_Origin], 1, ceil(N_FlocChannelBaffles[N_FlocChannels - 1]/4), -W_FlocChannel - T_PlantWall, -(4*B_FlocBaffle[N_FlocChannels - 1]))
ArrayPort2VLast := ArrayMultiple([BafflePort2VLast_Origin], 1, ceil((N_FlocChannelBaffles[N_FlocChannels - 1] - 3)/4), -W_FlocChannel - T_PlantWall, -(4*B_FlocBaffle[N_FlocChannels - 1]))
FlocCouplingBaffleCut := CylinderF(FlocCoupling_Origin, ConRadius(ND_RMPipe), SocketDepth(ND_RMPipe), [90; 0]*deg)
GroupBafflesV := GroupAll("DeleteMe")
SubtractBafflePortsV := SubtractF(["FlocModBaffles"], "DeleteMe")
MirrorBafflesV := MirrorAll([Floc_Origin[0]; Floc_Origin[1]] - [L_Sed/2; 0 m], [Floc_Origin[0]; Floc_Origin[1]] - [L_Sed/2; zc], "y")
FlocTankBaffleScriptV := stack(FlocBaffleLayerV, DrawLowerBaffleV, ArrayLowerBaffleV, DrawUpperBaffleV, ArrayUpperBaffleV, ArrayBafflesChannelV, DrawLastLowerBaffleV, ArrayLastLowerBaffleV, DrawLastUpperBaffleV, ArrayLastUpperBaffleV, FreezeBafflesV, DrawBafflePort1V, DrawBafflePort2V, DrawBafflePort1VLast, DrawBafflePort2VLast, ArrayPort1V, ArrayPort2V, ArrayPort1VLast, ArrayPort2VLast, FlocCouplingBaffleCut, GroupBafflesV, SubtractBafflePortsV)
FlocMod1CapLayer := layer_new("FlocModCapPlu", red)
FlocModLargeCap := CapF(LargeCap_Origin, [0; 0]*deg, ND_FlocModulesLarge)
FlocModFittedCap := CapF(FittedCap_Origin, [180; 0]*deg, ND_FlocModulesMain)
FlocMod1CapFrz := FreezeLayer("FlocModCapPlu")
FlocMod1CouplingLayer := layer_new("FlocModCouplingPlu", green)
FlocModCoupling := CouplingF(ModuleCoupling_Origin, [0; 0]*deg, ND_FlocModulesMain, PS_Modules)
FlocMod1CouplingFrz := FreezeLayer("FlocModCouplingPlu")  # must freeze this layer to ensure it gets grouped
FlocMod1PipeLayer := layer_new("FlocModPipePlu", blue)
FlocModLongPipe := PipeF(LongPipe_Origin, L_FlocModuleLong[0], [0; 0]*deg, ND_FlocModulesMain, PS_Modules)
FlocModConnectorPipe := PipeF(ConnectorPipe_Origin, L_FlocModuleConnector[0], [0; 0]*deg, ND_FlocModulesMain, PS_Modules)
FlocMod1PipeFrz := FreezeLayer("FlocModPipePlu")
FlocMod1SpacerLayer := layer_new("FlocModSpacerPlu", blue)
FlocModSpacerPipe1 := PipeF(FittedCap_Origin + [S_FlocBaffle[0] - CapThickness(ND_FlocModulesMain); 0; 0], S_FlocBaffle[0] - CapHeight(ND_FlocModulesMain), [0; 0]*deg, ND_SpacerPipe, PS_Modules)
FlocModSpacerPipe2 := PipeF(FittedCap_Origin + [2*S_FlocBaffle[0] - CapThickness(ND_FlocModulesMain) + T_FlocBaffle; 0; 0], S_FlocBaffle[0], [0; 0]*deg, ND_SpacerPipe, PS_Modules)
ArrayFlocModSpacer := ArrayLast(1, N_FlocChannelBafflesLong[0] - 2, B_FlocBaffle[0])
FlocMod1SpacerFrz := FreezeLayer("FlocModSpacerPlu")
FlocMod1Spacer :=
    stack(FlocMod1SpacerLayer, FlocModSpacerPipe1, FlocMod1SpacerFrz) if N_FlocChannelBafflesLong[0] == 2
    stack(FlocMod1SpacerLayer, FlocModSpacerPipe1, FlocModSpacerPipe2, ArrayFlocModSpacer, FlocMod1SpacerFrz) otherwise
ThawFlocMod1Components := ThawMultiple(["FlocMod*Plu"])
ArrayFlocModX := array_all(1, N_FlocChannelModulesLong[0], B_FlocBaffle[0]*N_FlocChannelBafflesLong[0])
FrzFlocModComponents := FreezeMultiple(["FlocMod*"])
SelectFlocMod1Spacer := SelectLayer("FlocModSpacerPlu")
FlocModSpacerPipe1Short := PipeF([
    Plant_Origin[0] - X_FlocBaffles[(N_FlocChannelBafflesShort[0] - 2)*(N_FlocChannelBafflesShort[0] > 2), 0] - T_FlocBaffle;
    FittedCap_Origin[1];
    FittedCap_Origin[2]
], S_FlocBaffle[0] - CapHeight(ND_FlocModulesMain), [0; 0]*deg, ND_SpacerPipe, PS_Modules)
FlocModSpacerPipe2Short := PipeF([
    Plant_Origin[0] - X_FlocBaffles[(N_FlocChannelBafflesShort[0] - 3)*(N_FlocChannelBafflesShort[0] > 2), 0] - T_FlocBaffle;
    FittedCap_Origin[1];
    FittedCap_Origin[2]
], S_FlocBaffle[0], [0; 0]*deg, ND_SpacerPipe, PS_Modules)
ArrayFlocModSpacerShort := ArrayLast(1, N_FlocChannelBafflesShort[0] - 2, B_FlocBaffle[0])
FlocShortBaffleSpacers1 :=
    stack(SelectFlocMod1Spacer, FlocModSpacerPipe1Short, FlocModSpacerPipe2Short) if N_FlocChannelBafflesShort[0] == 3
    stack(SelectFlocMod1Spacer, FlocModSpacerPipe1Short, FlocModSpacerPipe2Short, ArrayFlocModSpacerShort) otherwise
# FlocModSpacerFrz
SelectFlocMod1Piping := SelectLayer("FlocModPipePlu")
FlocModShortPipe := PipeF([
    Floc_Origin[0] - X_FlocBaffles[0, 0] + SocketDepth(ND_FlocModulesMain);
    LargeCap_Origin[1];
    LargeCap_Origin[2]
], L_FlocModuleShort[0], [0; 0]*deg, ND_FlocModulesMain, PS_Modules)
FlocModEndPipe := PipeF([Floc_Origin[0]; LargeCap_Origin[1]; LargeCap_Origin[2]], {
    L_FlocModuleShort[0] if N_FlocChannelBafflesShort[0] < 2
    (X_FlocBaffles[0, 0] - CouplingLength(ND_FlocModulesMain) + SocketDepth(ND_FlocModulesMain)) otherwise
}, [0; 0]*deg, ND_FlocModulesMain, PS_Modules)
FlocModRightPipe :=
    FlocModEndPipe if N_FlocChannelBafflesShort[0] < 2
    stack(FlocModShortPipe, FlocModEndPipe) otherwise
# FlocModPipeFrz
SelectFlocMod1PipeCap := SelectLayer("FlocModCapPlu")
FlocModLastLargeCap := CapF([
    {
        (Floc_Origin[0] - X_FlocBaffles[N_FlocChannelBafflesShort[0] - 1, 0] - T_FlocBaffle - (CapDiameter(ND_FlocModulesLarge)/2 - outerradius(ND_FlocModulesLarge))) if N_FlocChannelBafflesShort[0] ≥ 1
        (Floc_Origin[0] - X_FlocBaffles[0, 0] - T_FlocBaffle - (CapDiameter(ND_FlocModulesLarge)/2 - outerradius(ND_FlocModulesLarge))) otherwise
    };
    LargeCap_Origin[1];
    LargeCap_Origin[2]
], [0; 0]*deg, ND_FlocModulesLarge)
FlocModLastFittedCap := CapF([
    {
        (Floc_Origin[0] - X_FlocBaffles[N_FlocChannelBafflesShort[0] - 1, 0] + (CapDiameter(ND_FlocModulesMain)/2 - outerradius(ND_FlocModulesMain))) if N_FlocChannelBafflesShort[0] ≥ 1
        (Floc_Origin[0] - X_FlocBaffles[0, 0] + (CapDiameter(ND_FlocModulesMain)/2 - outerradius(ND_FlocModulesMain))) otherwise
    };
    LargeCap_Origin[1];
    LargeCap_Origin[2]
], [180; 0]*deg, ND_FlocModulesMain)
# FlocModCapFrz
# only if the short baffle doesn't have one baffle!!!
SelectFlocMod1Coupling := SelectLayer("FlocModCouplingPlu")
LastFlocModCoupling := CouplingF([
    Floc_Origin[0] - X_FlocBaffles[N_FlocChannelBaffles[0] - 1, 0] + CouplingLength(ND_FlocModulesMain) - SocketDepth(ND_FlocModulesMain);
    ModuleCoupling_Origin[1];
    ModuleCoupling_Origin[2]
], [0; 0]*deg, ND_FlocModulesMain, PS_Modules)
# FlocModCouplingFrz
# ThawFlocModComponents
ArrayTankModules := array_all(N_FlocChannels - 1, 1, -(W_FlocChannel + T_PlantWall))
MirrorTankModules :=
    Local ← ZoomWindow([-L_Sed - zc; (W_FlocChannel + T_PlantWall)*N_FlocChannels; 0] + Floc_Origin, Floc_Origin + [zc; zc; zc])
    for i ∈ 0 .. max(0, floor((N_FlocChannels - 1)/2) - 1)
        ModuleWindows[i, 0] ← [
            -L_Sed - zc;
            -i*(2*W_FlocChannel + T_PlantWall) + (N_FlocChannels - 1)*(W_FlocChannel + T_PlantWall) - T_PlantWall - W_FlocChannel/2;
            0
        ] + Floc_Origin
        ModuleWindows[i, 1] ← [
            zc;
            -i*(2*W_FlocChannel + T_PlantWall) + (N_FlocChannels - 1)*(W_FlocChannel + T_PlantWall) - T_PlantWall;
            0
        ] + Floc_Origin
    SelectMods ← SelectWindow(ModuleWindows)
    MirrorMods ← MirrorSelection([Floc_Origin[0] - L_Sed/2; Floc_Origin[1]], [Floc_Origin[0] - L_Sed/2; Floc_Origin[1] + zc], "y")
    Local ← stack(Local, SelectMods, MirrorMods)
    Local
FlocMod1Overlap :=
    stack(FlocMod1CapLayer, FlocModLargeCap, FlocModFittedCap, FlocMod1CapFrz, FlocMod1CouplingLayer, FlocModCoupling, FlocMod1CouplingFrz, FlocMod1PipeLayer, FlocModLongPipe, FlocModConnectorPipe, FlocMod1PipeFrz, FlocMod1Spacer, ThawFlocMod1Components, ArrayFlocModX, FrzFlocModComponents, SelectFlocMod1Piping, FlocModRightPipe, FlocMod1PipeFrz, SelectFlocMod1PipeCap, FlocModLastLargeCap, FlocModLastFittedCap, FlocMod1CapFrz, ThawFlocMod1Components, FrzFlocModComponents) if N_FlocChannelBafflesShort[0] < 2 and N_FlocChannels == 2
    stack(FlocMod1CapLayer, FlocModLargeCap, FlocModFittedCap, FlocMod1CapFrz, FlocMod1CouplingLayer, FlocModCoupling, FlocMod1CouplingFrz, FlocMod1PipeLayer, FlocModLongPipe, FlocModConnectorPipe, FlocMod1PipeFrz, FlocMod1Spacer, ThawFlocMod1Components, ArrayFlocModX, FrzFlocModComponents, FlocShortBaffleSpacers1, FlocMod1SpacerFrz, SelectFlocMod1Piping, FlocModRightPipe, FlocMod1PipeFrz, SelectFlocMod1PipeCap, FlocModLastLargeCap, FlocModLastFittedCap, FlocMod1CapFrz, SelectFlocMod1Coupling, LastFlocModCoupling, FlocMod1CouplingFrz, ThawFlocMod1Components, ArrayTankModules, MirrorTankModules, FrzFlocModComponents) if N_FlocChannels == 2 and N_FlocChannelBafflesShort[0] ≥ 2
    stack(FlocMod1CapLayer, FlocModLargeCap, FlocModFittedCap, FlocMod1CapFrz, FlocMod1CouplingLayer, FlocModCoupling, FlocMod1CouplingFrz, FlocMod1PipeLayer, FlocModLongPipe, FlocModConnectorPipe, FlocMod1PipeFrz, FlocMod1Spacer, ThawFlocMod1Components, ArrayFlocModX, FrzFlocModComponents, SelectFlocMod1Piping, FlocModRightPipe, FlocMod1PipeFrz, SelectFlocMod1PipeCap, FlocModLastLargeCap, FlocModLastFittedCap, FlocMod1CapFrz, ThawFlocMod1Components, ArrayTankModules, MirrorTankModules, FrzFlocModComponents) if N_FlocChannelBafflesShort[0] < 2
    stack(FlocMod1CapLayer, FlocModLargeCap, FlocModFittedCap, FlocMod1CapFrz, FlocMod1CouplingLayer, FlocModCoupling, FlocMod1CouplingFrz, FlocMod1PipeLayer, FlocModLongPipe, FlocModConnectorPipe, FlocMod1PipeFrz, FlocMod1Spacer, ThawFlocMod1Components, ArrayFlocModX, FrzFlocModComponents, FlocShortBaffleSpacers1, FlocMod1SpacerFrz, SelectFlocMod1Piping, FlocModRightPipe, FlocMod1PipeFrz, SelectFlocMod1PipeCap, FlocModLastLargeCap, FlocModLastFittedCap, FlocMod1CapFrz, SelectFlocMod1Coupling, LastFlocModCoupling, FlocMod1CouplingFrz, ThawFlocMod1Components, ArrayTankModules, MirrorTankModules, FrzFlocModComponents) otherwise
LargeCapLast_Origin := [
    Floc_Origin[0] + X_FlocBaffles[N_FlocChannelBaffles[last(N_FlocChannelBaffles)] - 1, cols(X_FlocBaffles) - 1] + CapThickness(ND_FlocModulesLarge) - L_Sed + T_FlocBaffle;
    Floc_Origin[1] - .05 m + W_FlocChannel;
    Floc_Origin[2] + 4*S_ModulePipesV + S_FlocBaffle[last(S_FlocBaffle)]*Pi_FlocBaffle - .05 m
]
FittedCapLast_Origin := [-T_FlocBaffle - CapThickness(ND_FlocModulesLarge) - CapThickness(ND_FlocModulesMain); 0 m; 0 m] + LargeCapLast_Origin
FlocModCouplingLast_Origin := FittedCapLast_Origin + [-L_FlocModuleLong[last(L_FlocModuleLong)]; 0 m; 0 m]
ConnectorPipeLast_Origin := FlocModCouplingLast_Origin + [-CouplingLength(ND_FlocModulesMain) + 2*SocketDepth(ND_FlocModulesMain); 0 m; 0 m]
# FrzFlocModComponents
# SelectFlocModPipeCap
FlocModLargeCapLast := CapF(LargeCapLast_Origin, [180; 0]*deg, ND_FlocModulesLarge)
ArrayFlocModXCap := ArrayLast(1, N_FlocChannelModulesLong[last(N_FlocChannelModulesLong)] + 1*(N_FlocChannelBafflesShort[last(N_FlocChannelBafflesShort)] > 0), -(B_FlocBaffle[last(B_FlocBaffle)]*N_FlocChannelBafflesLong[last(N_FlocChannelBafflesLong)]))
FlocModFittedCapLast := CapF(FittedCapLast_Origin, [0; 0]*deg, ND_FlocModulesMain)
# ArrayFlocModXCap
# FlocModCapFrz
FlocMod1CouplingSelect := SelectLayer("FlocModCouplingPlu")
FlocModCouplingLast := CouplingF(FlocModCouplingLast_Origin, [0; 0]*deg, ND_FlocModulesMain, PS_Modules)
FlocMod1CouplingFrz := FreezeLayer("FlocModCouplingPlu")
FlocMod1PipeSelect := SelectLayer("FlocModPipePlu")
FlocModLongPipeLast := PipeF(FittedCapLast_Origin, L_FlocModuleLong[last(L_FlocModuleLong)], [0; 0]*deg, ND_FlocModulesMain, PS_Modules)
ArrayFlocModXLast := ArrayLast(1, N_FlocChannelModulesLong[last(N_FlocChannelModulesLong)], -(B_FlocBaffle[last(B_FlocBaffle)]*N_FlocChannelBafflesLong[last(N_FlocChannelBafflesLong)]))
FlocModConnectorPipeLast :=
    PipeF(ConnectorPipeLast_Origin, S_FlocBaffle[last(S_FlocBaffle)] - CouplingLength(ND_FlocModulesMain) + SocketDepth(ND_FlocModulesMain) - CapThickness(ND_FlocModulesLarge), [0; 0]*deg, ND_FlocModulesMain, PS_Modules) if N_FlocChannelModulesLong[last(N_FlocChannelModulesLong)] - 1 < 2
    stack(PipeF(ConnectorPipeLast_Origin, S_FlocBaffle[last(S_FlocBaffle)] - CouplingLength(ND_FlocModulesMain) + SocketDepth(ND_FlocModulesMain) - CapThickness(ND_FlocModulesLarge), [0; 0]*deg, ND_FlocModulesMain, PS_Modules), ArrayLast(1, N_FlocChannelModulesLong[last(N_FlocChannelModulesLong)] - 1, -(B_FlocBaffle[last(B_FlocBaffle)]*N_FlocChannelBafflesLong[last(N_FlocChannelBafflesLong)]))) otherwise
LastFlocModConnectorPipe := PipeF([
    Plant_Origin[0] - L_Sed + X_FlocBaffles[0, N_FlocChannels - 1] - CouplingLength(ND_FlocModulesMain) + SocketDepth(ND_FlocModulesMain);
    ConnectorPipeLast_Origin[1];
    ConnectorPipeLast_Origin[2]
], X_FlocBaffles[0, N_FlocChannels - 1] - CouplingLength(ND_FlocModulesMain) + SocketDepth(ND_FlocModulesMain), [0; 0]*deg, ND_FlocModulesMain, PS_Modules)
LastFlocModShortPipe :=
    if N_FlocChannelBafflesShort[last(N_FlocChannelBafflesShort)] ≠ 0
        PipeF([
            (Plant_Origin[0] - X_FlocBaffles[N_FlocChannelBafflesLong[last(N_FlocChannelBafflesLong)]*N_FlocChannelModulesLong[last(N_FlocChannelModulesLong)], N_FlocChannels - 1]) - CapThickness(ND_FlocModulesMain) - T_FlocBaffle;
            ConnectorPipeLast_Origin[1];
            ConnectorPipeLast_Origin[2]
        ], L_FlocModuleShort[last(L_FlocModuleShort)], [0; 0]*deg, ND_FlocModulesMain, PS_Modules)
    "0" otherwise
FlocModEndPipeLast := PipeF([
    Floc_Origin[0] - X_FlocBaffles[N_FlocChannelBaffles[last(N_FlocChannelBaffles)] - 1, N_FlocChannels - 1] - T_FlocBaffle - CouplingLength(ND_FlocModulesMain) + SocketDepth(ND_FlocModulesMain);
    FittedCapLast_Origin[1];
    FittedCapLast_Origin[1]
], L_Sed - X_FlocBaffles[N_FlocChannelBaffles[last(N_FlocChannelBaffles)] - 1, N_FlocChannels - 1] - CouplingLength(ND_FlocModulesMain) + SocketDepth(ND_FlocModulesMain) - T_FlocBaffle, [0; 0]*deg, ND_FlocModulesMain, PS_Modules)
# FlocModPipeFrz
FlocModSpacerPipeLast :=
    Local ← stack(SelectLayer("FlocModSpacerPlu"), PipeF(FittedCapLast_Origin + [CapThickness(ND_FlocModulesMain) - CapHeight(ND_FlocModulesMain); 0; 0], S_FlocBaffle[N_FlocChannels - 1] - CapHeight(ND_FlocModulesMain), [0; 0]*deg, ND_SpacerPipe, PS_Modules), ArrayFlocModXLast)
    if N_FlocChannelBafflesLong[N_FlocChannels - 1] > 2
        for i ∈ 0 .. N_FlocChannelBafflesLong[N_FlocChannels - 1] - 3
            Local ← stack(Local, PipeF(FittedCapLast_Origin - [
                S_FlocBaffle[0] - CapThickness(ND_FlocModulesMain) + T_FlocBaffle + B_FlocBaffle[N_FlocChannels - 1]*i;
                0;
                0
            ], S_FlocBaffle[N_FlocChannels - 1], [0; 0]*deg, ND_SpacerPipe, PS_Modules), ArrayFlocModXLast)
    Local
SelectFlocMod1Spacer := SelectLayer("FlocModSpacerPlu")
FlocModSpacerPipeLastShort1 :=
    if N_FlocChannelBafflesShort[last(N_FlocChannelBafflesShort)] ≠ 0
        PipeF([
            Plant_Origin[0] - X_FlocBaffles[N_FlocChannelBafflesLong[last(N_FlocChannelBafflesLong)]*N_FlocChannelModulesLong[last(N_FlocChannelModulesLong)], N_FlocChannels - 1] - CapHeight(ND_FlocModulesMain) - T_FlocBaffle;
            FittedCapLast_Origin[1];
            FittedCapLast_Origin[2]
        ], S_FlocBaffle[N_FlocChannels - 1] - CapHeight(ND_FlocModulesMain), [0; 0]*deg, ND_SpacerPipe, PS_Modules)
    "0" otherwise
FlocModSpacerPipeLastShort2 :=
    if N_FlocChannelBafflesShort[last(N_FlocChannelBafflesShort)] ≠ 0
        PipeF([
            Plant_Origin[0] - X_FlocBaffles[(N_FlocChannelBafflesShort[last(N_FlocChannelBafflesShort)] ≠ 0)*(N_FlocChannelBafflesLong[last(N_FlocChannelBafflesLong)]*N_FlocChannelModulesLong[last(N_FlocChannelModulesLong)] + 1), N_FlocChannels - 1] - T_FlocBaffle;
            FittedCapLast_Origin[1];
            FittedCapLast_Origin[2]
        ], S_FlocBaffle[N_FlocChannels - 1], [0; 0]*deg, ND_SpacerPipe, PS_Modules)
    "0" otherwise
ArrayModSpacerShortLast := ArrayLast(1, N_FlocChannelBafflesShort[last(N_FlocChannelBafflesShort)] - 2, -B_FlocBaffle[last(B_FlocBaffle)])
FlocModSpacerPipeLastShortEnd := PipeF([
    Plant_Origin[0] - X_FlocBaffles[N_FlocChannelBaffles[last(N_FlocChannelBaffles)] - 1, N_FlocChannels - 1] - T_FlocBaffle;
    FittedCapLast_Origin[1];
    FittedCapLast_Origin[2]
], L_Sed - X_FlocBaffles[N_FlocChannelBaffles[last(N_FlocChannelBaffles)] - 1, N_FlocChannels - 1], [0; 0]*deg, ND_SpacerPipe, PS_Modules)
# SelectFlocModCoupling
FlocModCouplingLastEnd := CouplingF([
    Floc_Origin[0] - X_FlocBaffles[N_FlocChannelBaffles[last(N_FlocChannelBaffles)] - 1, N_FlocChannels - 1] - T_FlocBaffle - SocketDepth(ND_FlocModulesMain);
    FittedCapLast_Origin[1];
    FittedCapLast_Origin[2]
], [0; 0]*deg, ND_FlocModulesMain, PS_Modules)
# FlocModCouplingFrz
FlocModSpacerShortLast :=
    stack(SelectFlocMod1Spacer, FlocModSpacerPipeLastShort1, FlocMod1SpacerFrz) if N_FlocChannelBafflesShort[last(N_FlocChannelBafflesShort)] == 2
    stack(SelectFlocMod1Spacer, FlocModSpacerPipeLastShort1, FlocModSpacerPipeLastShort2, ArrayModSpacerShortLast, FlocMod1SpacerFrz) otherwise
FlocModLast :=
    stack(SelectFlocMod1PipeCap, FlocModLargeCapLast, ArrayFlocModXCap, FlocModFittedCapLast, ArrayFlocModXCap, FlocMod1CapFrz, FlocMod1CouplingSelect, FlocModCouplingLast, ArrayFlocModXLast, FlocMod1CouplingFrz, FlocMod1PipeSelect, FlocModLongPipeLast, ArrayFlocModXLast, FlocModConnectorPipeLast, LastFlocModConnectorPipe, FlocMod1PipeFrz, FlocModSpacerPipeLast, FrzFlocModComponents) if N_FlocChannelBafflesShort[last(N_FlocChannelBafflesShort)] == 0
    stack(SelectFlocMod1PipeCap, FlocModLargeCapLast, ArrayFlocModXCap, FlocModFittedCapLast, ArrayFlocModXCap, FlocMod1CapFrz, FlocMod1CouplingSelect, FlocModCouplingLast, ArrayFlocModXLast, FlocMod1CouplingFrz, FlocMod1PipeSelect, FlocModLongPipeLast, ArrayFlocModXLast, FlocModConnectorPipeLast, LastFlocModShortPipe, FlocModEndPipeLast, FlocMod1PipeFrz, SelectFlocMod1Coupling, FlocModCouplingLastEnd, FlocMod1CouplingFrz, FlocModSpacerPipeLast, FrzFlocModComponents) otherwise
ThawAllFlocModules := ThawMultiple(["FlocMod*Plu"])
ArrayFlocModY := array_all(2, 1, -W_FlocChannel + 4*S_Fitting)
ArrayFlocModZ := array_all(3, 1, (-S_ModulePipesV*4 + .1 m)/2)
FlocModulesOverlapping :=
    FlocMod1Overlap if N_SedTanks == 1 and N_SedBays == 1
    stack(FlocMod1Overlap, FlocModLast, ThawAllFlocModules, ArrayFlocModY, view("f"), ArrayFlocModZ, view("t"), FrzFlocModComponents) otherwise
# FlocMod1CapLayer
FlocModLargeCapUpper := CapF([
    LargeCap_Origin[0] + B_FlocBaffle[0];
    LargeCap_Origin[1];
    Floc_Origin[2] + H_Floc - 0.5*H_PlantFreeboard - S_Fitting - ConRadius(ND_FlocModulesLarge)
], [0; 0]*deg, ND_FlocModulesLarge)
FlocModLargeCapMiddle := CapF(LargeCap_Origin, [0; 0]*deg, ND_FlocModulesLarge)
FlocModLargeCapLower := CapF([
    LargeCap_Origin[0];
    LargeCap_Origin[1];
    Floc_Origin[2] + S_Fitting + L_BafflePort + ConRadius(ND_FlocModulesLarge)
], [0; 0]*deg, ND_FlocModulesLarge)
FlocModFittedCapUpper := CapF([
    FittedCap_Origin[0] + B_FlocBaffle[0];
    FittedCap_Origin[1];
    Floc_Origin[2] + H_Floc - 0.5*H_PlantFreeboard - S_Fitting - ConRadius(ND_FlocModulesLarge)
], [180; 0]*deg, ND_FlocModulesMain)
FlocModFittedCapMiddle := CapF(FittedCap_Origin, [180; 0]*deg, ND_FlocModulesMain)
FlocModFittedCapLower := CapF([
    FittedCap_Origin[0];
    FittedCap_Origin[1];
    Floc_Origin[2] + S_Fitting + L_BafflePort + ConRadius(ND_FlocModulesLarge)
], [180; 0]*deg, ND_FlocModulesMain)
# FlocMod1CapFrz
# FlocMod1CouplingLayer
FlocModCouplingUpper := CouplingF([
    ModuleCoupling_Origin[0];
    ModuleCoupling_Origin[1];
    Floc_Origin[2] + H_Floc - 0.5*H_PlantFreeboard - S_Fitting - ConRadius(ND_FlocModulesLarge)
], [0; 0]*deg, ND_FlocModulesMain, PS_Modules)
FlocModCouplingMiddle := CouplingF(ModuleCoupling_Origin, [0; 0]*deg, ND_FlocModulesMain, PS_Modules)
FlocModCouplingLower := CouplingF([
    ModuleCoupling_Origin[0] - B_FlocBaffle[0];
    ModuleCoupling_Origin[1];
    Floc_Origin[2] + S_Fitting + L_BafflePort + ConRadius(ND_FlocModulesLarge)
], [0; 0]*deg, ND_FlocModulesMain, PS_Modules)
# FlocMod1CouplingFrz | must freeze this layer to ensure it gets grouped
# FlocMod1PipeLayer
FlocModLongPipeUpper := PipeF([
    FittedCap_Origin[0] + L_FlocModuleLongOuter[0] + B_FlocBaffle[0];
    FittedCap_Origin[1];
    Floc_Origin[2] + H_Floc - 0.5*H_PlantFreeboard - S_Fitting - ConRadius(ND_FlocModulesLarge)
], L_FlocModuleLongOuter[0], [0; 0]*deg, ND_FlocModulesMain, PS_Modules)
FlocModLongPipeMiddle := PipeF(LongPipe_Origin, L_FlocModuleLong[0], [0; 0]*deg, ND_FlocModulesMain, PS_Modules)
FlocModLongPipeLower := PipeF([
    FittedCap_Origin[0] + L_FlocModuleLongOuter[0];
    FittedCap_Origin[1];
    Floc_Origin[2] + S_Fitting + L_BafflePort + ConRadius(ND_FlocModulesLarge)
], L_FlocModuleLongOuter[0], [0; 0]*deg, ND_FlocModulesMain, PS_Modules)
# FlocMod1PipeFrz
FlocModConnectPipeLayer := layer_new("FlocModConnectPipePlu", blue)
FlocModConnectorPipeUpper := PipeF([
    ConnectorPipe_Origin[0] + B_FlocBaffle[0];
    ConnectorPipe_Origin[1];
    Floc_Origin[2] + H_Floc - 0.5*H_PlantFreeboard - S_Fitting - ConRadius(ND_FlocModulesLarge)
], L_FlocModuleConnectorOuter[0], [0; 0]*deg, ND_FlocModulesMain, PS_Modules)
FlocModConnectorPipeMiddle := PipeF(ConnectorPipe_Origin, L_FlocModuleConnector[0], [0; 0]*deg, ND_FlocModulesMain, PS_Modules)
FlocModConnectorPipeLower := PipeF([
    ConnectorPipe_Origin[0];
    ConnectorPipe_Origin[1];
    Floc_Origin[2] + S_Fitting + L_BafflePort + ConRadius(ND_FlocModulesLarge)
], L_FlocModuleConnectorOuter[0], [0; 0]*deg, ND_FlocModulesMain, PS_Modules)
FlocModConnectPipeFrz := FreezeLayer("FlocModConnectPipePlu")
FlocMod1SpacerLayer := layer_new("FlocModSpacerPlu", blue)
FlocModSpacerPipe1Middle := PipeF(FittedCap_Origin + [S_FlocBaffle[0] - CapThickness(ND_FlocModulesMain); 0; 0], S_FlocBaffle[0] - CapHeight(ND_FlocModulesMain), [0; 0]*deg, ND_SpacerPipe, PS_Modules)
FlocModSpacerPipe2Middle := PipeF(FittedCap_Origin + [2*S_FlocBaffle[0] - CapThickness(ND_FlocModulesMain) + T_FlocBaffle; 0; 0], S_FlocBaffle[0], [0; 0]*deg, ND_SpacerPipe, PS_Modules)
# ArrayFlocModSpacer
FlocModSpacerUpper1 := PipeF([
    Floc_Origin[0] - L_Sed + X_FlocBaffles[1, 0] + 2*B_FlocBaffle[0];
    FittedCap_Origin[1];
    Floc_Origin[2] + H_Floc - 0.5*H_PlantFreeboard - S_Fitting - ConRadius(ND_FlocModulesLarge)
], 2*S_FlocBaffle[0] - CapHeight(ND_FlocModulesMain) + T_FlocBaffle, [0; 0]*deg, ND_SpacerPipe, PS_Modules)
FlocModSpacerUpper2 := PipeF([
    Floc_Origin[0] - L_Sed + X_FlocBaffles[1, 0] + 4*B_FlocBaffle[0];
    FittedCap_Origin[1];
    Floc_Origin[2] + H_Floc - 0.5*H_PlantFreeboard - S_Fitting - ConRadius(ND_FlocModulesLarge)
], 2*S_FlocBaffle[0] + T_FlocBaffle, [0; 0]*deg, ND_SpacerPipe, PS_Modules)
FlocModSpacerLower1 := PipeF([
    Floc_Origin[0] - L_Sed + X_FlocBaffles[0, 0] + 2*B_FlocBaffle[0];
    FittedCap_Origin[1];
    Floc_Origin[2] + S_Fitting + L_BafflePort + ConRadius(ND_FlocModulesLarge)
], 2*S_FlocBaffle[0] - CapHeight(ND_FlocModulesMain) + T_FlocBaffle, [0; 0]*deg, ND_SpacerPipe, PS_Modules)
FlocModSpacerLower2 := PipeF([
    Floc_Origin[0] - L_Sed + X_FlocBaffles[0, 0] + 4*B_FlocBaffle[0];
    FittedCap_Origin[1];
    Floc_Origin[2] + S_Fitting + L_BafflePort + ConRadius(ND_FlocModulesLarge)
], 2*S_FlocBaffle[0] + T_FlocBaffle, [0; 0]*deg, ND_SpacerPipe, PS_Modules)
ArrayFlocModSpacerOuter := ArrayLast(1, (N_FlocChannelBafflesLong[0] - 2)/2, 2*B_FlocBaffle[0])
# FlocMod1SpacerFrz
FlocMod1SpacerNO :=
    stack(FlocMod1SpacerLayer, FlocModSpacerPipe1Middle, FlocModSpacerPipe2Middle, ArrayFlocModSpacer, FlocModSpacerUpper1, FlocModSpacerLower1, FlocMod1SpacerFrz) if N_FlocChannelBafflesLong[0] == 4
    stack(FlocMod1SpacerLayer, FlocModSpacerPipe1Middle, FlocModSpacerPipe2Middle, ArrayFlocModSpacer, FlocModSpacerUpper1, FlocModSpacerUpper2, FlocModSpacerLower1, FlocModSpacerLower2, FlocMod1SpacerFrz) if N_FlocChannelBafflesLong[0] == 6
    stack(FlocMod1SpacerLayer, FlocModSpacerPipe1Middle, FlocModSpacerPipe2Middle, ArrayFlocModSpacer, FlocModSpacerUpper1, FlocModSpacerUpper2, ArrayFlocModSpacerOuter, FlocModSpacerLower1, FlocModSpacerLower2, ArrayFlocModSpacerOuter, FlocMod1SpacerFrz) otherwise
ThawFlocModPieces := ThawMultiple(["FlocModCapPlu"; "FlocModPipePlu"; "FlocModSpacerPlu"; "FlocModCouplingPlu"])
# ArrayFlocModX
# FrzFlocModComponents
ThawFlocModPieces2 := ThawMultiple(["FlocModConnectPipePlu"])
ArrayFlocModXLess := array_all(1, N_FlocChannelModulesLong[0] - 1, B_FlocBaffle[0]*N_FlocChannelBafflesLong[0])
# FrzFlocModComponents
FlocModThawArray :=
    stack(ThawFlocModPieces, ArrayFlocModX, FrzFlocModComponents) if N_FlocChannelModulesLong[0] == 2
    stack(ThawFlocModPieces, ArrayFlocModX, FrzFlocModComponents, ThawFlocModPieces2, ArrayFlocModXLess, FrzFlocModComponents) otherwise
# SelectFlocMod1Spacer
FlocModSpacerPipe1Short := PipeF([
    Plant_Origin[0] - X_FlocBaffles[(N_FlocChannelBafflesShort[0] - 2)*(N_FlocChannelBafflesShort[0] > 2), 0] - T_FlocBaffle;
    FittedCap_Origin[1];
    FittedCap_Origin[2]
], S_FlocBaffle[0] - CapHeight(ND_FlocModulesMain), [0; 0]*deg, ND_SpacerPipe, PS_Modules)
FlocModSpacerPipe2Short := PipeF([
    Plant_Origin[0] - X_FlocBaffles[(N_FlocChannelBafflesShort[0] - 3)*(N_FlocChannelBafflesShort[0] > 2), 0] - T_FlocBaffle;
    FittedCap_Origin[1];
    FittedCap_Origin[2]
], S_FlocBaffle[0], [0; 0]*deg, ND_SpacerPipe, PS_Modules)
FlocModSpacerLowerEnd := PipeF([
    Plant_Origin[0] - X_FlocBaffles[(N_FlocChannelBafflesShort[0] - 3)*(N_FlocChannelBafflesShort[0] > 2), 0] - T_FlocBaffle;
    FittedCap_Origin[1];
    Floc_Origin[2] + S_Fitting + L_BafflePort + ConRadius(ND_FlocModulesLarge)
], 2*S_FlocBaffle[0] - CapHeight(ND_FlocModulesMain) + T_FlocBaffle, [0; 0]*deg, ND_SpacerPipe, PS_Modules)
ArrayFlocModSpacerShortLower := ArrayLast(1, floor((N_FlocChannelBafflesShort[0] - 2)/2), B_FlocBaffle[0])
FlocModSpacerUpper := PipeF([
    Plant_Origin[0] - X_FlocBaffles[(N_FlocChannelBafflesShort[0] - 3)*(N_FlocChannelBafflesShort[0] > 2), 0] + S_FlocBaffle[0];
    FittedCap_Origin[1];
    Floc_Origin[2] + H_Floc - 0.5*H_PlantFreeboard - S_Fitting - ConRadius(ND_FlocModulesLarge)
], 2*S_FlocBaffle[0] - CapHeight(ND_FlocModulesMain) + T_FlocBaffle, [0; 0]*deg, ND_SpacerPipe, PS_Modules)
ArrayFlocModSpacerShortUpper := ArrayLast(1, floor((N_FlocChannelBafflesShort[0] - 2)/2) - 1, B_FlocBaffle[0])
FlocShortBaffleSpacers1 :=
    stack(SelectFlocMod1Spacer, FlocModSpacerPipe1Short, FlocModSpacerPipe2Short, FlocModSpacerLowerEnd) if N_FlocChannelBafflesShort[0] == 3
    stack(SelectFlocMod1Spacer, FlocModSpacerPipe1Short, FlocModSpacerPipe2Short, ArrayFlocModSpacerShort, FlocModSpacerLowerEnd, ArrayFlocModSpacerShortLower, FlocModSpacerUpper) if N_FlocChannelBafflesShort[0] == 5
    stack(SelectFlocMod1Spacer, FlocModSpacerPipe1Short, FlocModSpacerPipe2Short, ArrayFlocModSpacerShort, FlocModSpacerLowerEnd, ArrayFlocModSpacerShortLower, FlocModSpacerUpper, ArrayFlocModSpacerShortUpper) otherwise
# FlocModSpacerFrz
SelectFlocMod1Piping := SelectLayer("FlocModPipePlu")
FlocModPipeShortUpper := PipeF([
    Plant_Origin[0] - X_FlocBaffles[1, 0] + SocketDepth(ND_FlocModulesMain);
    FittedCap_Origin[1];
    Floc_Origin[2] + S_Fitting + L_BafflePort + ConRadius(ND_FlocModulesLarge)
], (N_FlocChannelBafflesShort[0] - 3)*(S_FlocBaffle[0] + T_FlocBaffle) - CapThickness(ND_FlocModulesMain) + SocketDepth(ND_FlocModulesMain), [0; 0]*deg, ND_FlocModulesMain, PS_Modules) = ["_cylinder -0.62479,1.27,0.15736 0.01067 a -0.62411,1.27,0.15736"; "_cylinder -0.61479,1.27,0.15736 0.00966 a -0.63411,1.27,0.15736"; "_zoom w -0.63411,1.24933,0.15736 -0.61411,1.29067,0.15736"; "_subtract -0.62411,1.28067,0.15736  -0.63411,1.27966,0.15736 "]
FlocModPipeShortMiddle := PipeF([
    Plant_Origin[0] - X_FlocBaffles[0, 0] + SocketDepth(ND_FlocModulesMain);
    FittedCap_Origin[1];
    FittedCap_Origin[2]
], (N_FlocChannelBafflesShort[0] - 1)*(S_FlocBaffle[0] + T_FlocBaffle) - CapThickness(ND_FlocModulesMain) + SocketDepth(ND_FlocModulesMain), [0; 0]*deg, ND_FlocModulesMain, PS_Modules)
FlocModPipeShortLower := PipeF([
    Plant_Origin[0] - X_FlocBaffles[0, 0] + SocketDepth(ND_FlocModulesMain);
    FittedCap_Origin[1];
    Floc_Origin[2] + S_Fitting + L_BafflePort + ConRadius(ND_FlocModulesLarge)
], (N_FlocChannelBafflesShort[0] - 1)*(S_FlocBaffle[0] + T_FlocBaffle) - CapThickness(ND_FlocModulesMain) + SocketDepth(ND_FlocModulesMain), [0; 0]*deg, ND_FlocModulesMain, PS_Modules)
FlocModEndPipeUpper := PipeF([
    Floc_Origin[0];
    LargeCap_Origin[1];
    Floc_Origin[2] + H_Floc - 0.5*H_PlantFreeboard - S_Fitting - ConRadius(ND_FlocModulesLarge)
], {
    (2*S_FlocBaffle[0] + T_FlocBaffle - CapThickness(ND_FlocModulesMain)) if N_FlocChannelBafflesShort[0] == 3
    (2*S_FlocBaffle[0] + T_FlocBaffle - CouplingLength(ND_FlocModulesMain) + SocketDepth(ND_FlocModulesMain)) otherwise
}, [0; 0]*deg, ND_FlocModulesMain, PS_Modules)
FlocModEndPipeMiddle := PipeF([Floc_Origin[0]; LargeCap_Origin[1]; LargeCap_Origin[2]], {
    (S_FlocBaffle[0] - CapThickness(ND_FlocModulesMain)) if N_FlocChannelBafflesShort[0] == 1
    (S_FlocBaffle[0] - CouplingLength(ND_FlocModulesMain) + SocketDepth(ND_FlocModulesMain)) otherwise
}, [0; 0]*deg, ND_FlocModulesMain, PS_Modules)
FlocModEndPipeLower := PipeF([
    Floc_Origin[0];
    LargeCap_Origin[1];
    Floc_Origin[2] + S_Fitting + L_BafflePort + ConRadius(ND_FlocModulesLarge)
], {
    (S_FlocBaffle[0] - CapThickness(ND_FlocModulesMain)) if N_FlocChannelBafflesShort[0] == 1
    (S_FlocBaffle[0] - CouplingLength(ND_FlocModulesMain) + SocketDepth(ND_FlocModulesMain)) otherwise
}, [0; 0]*deg, ND_FlocModulesMain, PS_Modules)
# FlocModPipeFrz
FlocModShortAndEndPipes :=
    stack(SelectFlocMod1Piping, FlocModEndPipeUpper, FlocModEndPipeMiddle, FlocModEndPipeLower, FlocMod1PipeFrz) if N_FlocChannelBafflesShort[0] == 1
    stack(SelectFlocMod1Piping, FlocModEndPipeUpper, FlocModEndPipeMiddle, FlocModEndPipeLower, FlocModPipeShortMiddle, FlocModPipeShortLower, FlocMod1PipeFrz) if N_FlocChannelBafflesShort[0] == 3
    stack(SelectFlocMod1Piping, FlocModEndPipeUpper, FlocModEndPipeMiddle, FlocModEndPipeLower, FlocModPipeShortUpper, FlocModPipeShortMiddle, FlocModPipeShortLower, FlocMod1PipeFrz) otherwise
SelectFlocMod1PipeCap := SelectLayer("FlocModCapPlu")
FlocModEndLargeCapUpper :=
    if N_FlocChannelBafflesShort[0] > 1
        CapF([
            Floc_Origin[0] - X_FlocBaffles[N_FlocChannelBafflesShort[0] - 2, 0] - T_FlocBaffle - CapThickness(ND_FlocModulesLarge);
            LargeCap_Origin[1];
            Floc_Origin[2] + H_Floc - 0.5*H_PlantFreeboard - S_Fitting - ConRadius(ND_FlocModulesLarge)
        ], [0; 0]*deg, ND_FlocModulesLarge)
    "0" otherwise
FlocModEndLargeCapMiddle :=
    if N_FlocChannelBafflesShort[0] > 0
        CapF([
            Floc_Origin[0] - X_FlocBaffles[N_FlocChannelBafflesShort[0] - 1, 0] - T_FlocBaffle - CapThickness(ND_FlocModulesLarge);
            LargeCap_Origin[1];
            LargeCap_Origin[2]
        ], [0; 0]*deg, ND_FlocModulesLarge)
    "0" otherwise
FlocModEndLargeCapLower :=
    if N_FlocChannelBafflesShort[0] > 0
        CapF([
            Floc_Origin[0] - X_FlocBaffles[N_FlocChannelBafflesShort[0] - 1, 0] - T_FlocBaffle - CapThickness(ND_FlocModulesLarge);
            LargeCap_Origin[1];
            Floc_Origin[2] + S_Fitting + L_BafflePort + ConRadius(ND_FlocModulesLarge)
        ], [0; 0]*deg, ND_FlocModulesLarge)
    "0" otherwise
FlocModEndFittedCapUpper :=
    if N_FlocChannelBafflesShort[0] > 1
        CapF([
            Floc_Origin[0] - X_FlocBaffles[N_FlocChannelBafflesShort[0] - 2, 0] + CapThickness(ND_FlocModulesMain);
            LargeCap_Origin[1];
            Floc_Origin[2] + H_Floc - 0.5*H_PlantFreeboard - S_Fitting - ConRadius(ND_FlocModulesLarge)
        ], [180; 0]*deg, ND_FlocModulesMain)
    "0" otherwise
FlocModEndFittedCapMiddle :=
    if N_FlocChannelBafflesShort[0] > 0
        CapF([
            Floc_Origin[0] - X_FlocBaffles[N_FlocChannelBafflesShort[0] - 1, 0] + CapThickness(ND_FlocModulesMain);
            LargeCap_Origin[1];
            LargeCap_Origin[2]
        ], [180; 0]*deg, ND_FlocModulesMain)
    "0" otherwise
FlocModEndFittedCapLower :=
    if N_FlocChannelBafflesShort[0] > 0
        CapF([
            Floc_Origin[0] - X_FlocBaffles[N_FlocChannelBafflesShort[0] - 1, 0] + CapThickness(ND_FlocModulesMain);
            LargeCap_Origin[1];
            Floc_Origin[2] + S_Fitting + L_BafflePort + ConRadius(ND_FlocModulesLarge)
        ], [180; 0]*deg, ND_FlocModulesMain)
    "0" otherwise
# FlocModCapFrz
FlocModCapsEnd :=
    stack(SelectFlocMod1PipeCap, FlocModEndLargeCapMiddle, FlocModEndLargeCapLower, FlocModEndFittedCapMiddle, FlocModEndFittedCapLower, FlocMod1CapFrz) if N_FlocChannelBafflesShort[0] == 1
    stack(SelectFlocMod1PipeCap, FlocModEndLargeCapUpper, FlocModEndLargeCapMiddle, FlocModEndLargeCapLower, FlocModEndFittedCapUpper, FlocModEndFittedCapMiddle, FlocModEndFittedCapLower, FlocMod1CapFrz) otherwise
# only if the short baffle doesn't have one baffle!!!
# SelectFlocMod1Coupling
EndFlocModCouplingUpper := CouplingF([
    Floc_Origin[0] - X_FlocBaffles[1, 0] + CouplingLength(ND_FlocModulesMain) - SocketDepth(ND_FlocModulesMain);
    ModuleCoupling_Origin[1];
    Floc_Origin[2] + H_Floc - 0.5*H_PlantFreeboard - S_Fitting - ConRadius(ND_FlocModulesLarge)
], [0; 0]*deg, ND_FlocModulesMain, PS_Modules)
EndFlocModCouplingMiddle := CouplingF([
    Floc_Origin[0] - X_FlocBaffles[0, 0] + CouplingLength(ND_FlocModulesMain) - SocketDepth(ND_FlocModulesMain);
    ModuleCoupling_Origin[1];
    ModuleCoupling_Origin[2]
], [0; 0]*deg, ND_FlocModulesMain, PS_Modules)
EndFlocModCouplingLower := CouplingF([
    Floc_Origin[0] - X_FlocBaffles[0, 0] + CouplingLength(ND_FlocModulesMain) - SocketDepth(ND_FlocModulesMain);
    ModuleCoupling_Origin[1];
    Floc_Origin[2] + S_Fitting + L_BafflePort + ConRadius(ND_FlocModulesLarge)
], [0; 0]*deg, ND_FlocModulesMain, PS_Modules)
# FlocMod1CouplingFrz
FlocModCouplingsEnd :=
    stack(SelectFlocMod1Coupling, EndFlocModCouplingMiddle, EndFlocModCouplingLower, FlocMod1CouplingFrz) if N_FlocChannelBafflesShort[0] == 3
    stack(SelectFlocMod1Coupling, EndFlocModCouplingUpper, EndFlocModCouplingMiddle, EndFlocModCouplingLower, FlocMod1CouplingFrz) otherwise
SelectFlocModConnectPipe := SelectLayer("FlocModConnectPipePlu")
FlocModConnectPipeEndUpper := PipeF([
    Floc_Origin[0] - X_FlocBaffles[N_FlocChannelBafflesShort[0], 0] + CouplingLength(ND_FlocModulesMain) - SocketDepth(ND_FlocModulesMain) + L_FlocModuleConnectorOuter[0];
    ModuleCoupling_Origin[1];
    Floc_Origin[2] + H_Floc - 0.5*H_PlantFreeboard - S_Fitting - ConRadius(ND_FlocModulesLarge)
], L_FlocModuleConnectorOuter[0], [0; 0]*deg, ND_FlocModulesMain, PS_Modules)
FlocModConnectPipeEndMiddle := PipeF([
    Floc_Origin[0] - X_FlocBaffles[N_FlocChannelBafflesShort[0], 0] + CouplingLength(ND_FlocModulesMain) - SocketDepth(ND_FlocModulesMain) + L_FlocModuleConnector[0];
    ModuleCoupling_Origin[1];
    ModuleCoupling_Origin[2]
], L_FlocModuleConnector[0], [0; 0]*deg, ND_FlocModulesMain, PS_Modules)
FlocModConnectPipeEndLower := PipeF([
    Floc_Origin[0] - X_FlocBaffles[N_FlocChannelBafflesShort[0] + 1, 0] + CouplingLength(ND_FlocModulesMain) - SocketDepth(ND_FlocModulesMain) + L_FlocModuleConnectorOuter[0];
    ModuleCoupling_Origin[1];
    Floc_Origin[2] + S_Fitting + L_BafflePort + ConRadius(ND_FlocModulesLarge)
], L_FlocModuleConnectorOuter[0], [0; 0]*deg, ND_FlocModulesMain, PS_Modules)
# FlocModConnectPipeFrz
EndFlocModConPipe :=
    stack(SelectFlocModConnectPipe, FlocModConnectPipeEndMiddle, FlocModConnectPipeEndLower, FlocModConnectPipeFrz) if N_FlocChannelBafflesShort[0] == 1
    stack(SelectFlocModConnectPipe, FlocModConnectPipeEndUpper, FlocModConnectPipeEndMiddle, FlocModConnectPipeEndLower, FlocModConnectPipeFrz) otherwise
# ThawFlocModComponents
ArrayTankModules := array_all(N_FlocChannels - 1, 1, -(W_FlocChannel + T_PlantWall))
# MirrorTankModules
FlocMod1NoOverlap :=
    stack(FlocMod1CapLayer, FlocModLargeCapUpper, FlocModLargeCapMiddle, FlocModLargeCapLower, FlocModFittedCapUpper, FlocModFittedCapMiddle, FlocModFittedCapLower, FlocMod1CapFrz, FlocMod1CouplingLayer, FlocModCouplingUpper, FlocModCouplingMiddle, FlocModCouplingLower, FlocMod1CouplingFrz, FlocMod1PipeLayer, FlocModLongPipeUpper, FlocModLongPipeMiddle, FlocModLongPipeLower, FlocMod1PipeFrz, FlocModConnectPipeLayer, FlocModConnectorPipeUpper, FlocModConnectorPipeMiddle, FlocModConnectorPipeLower, FlocModConnectPipeFrz, FlocMod1SpacerNO, FlocModThawArray, FlocModCapsEnd, EndFlocModConPipe, FlocModShortAndEndPipes, ThawFlocMod1Components, ArrayTankModules, MirrorTankModules, FrzFlocModComponents) if N_FlocChannelBafflesShort[0] < 2 and (N_FlocChannels > 2 or N_SedBays == 1 and N_SedTanks == 1)
    stack(FlocMod1CapLayer, FlocModLargeCapUpper, FlocModLargeCapMiddle, FlocModLargeCapLower, FlocModFittedCapUpper, FlocModFittedCapMiddle, FlocModFittedCapLower, FlocMod1CapFrz, FlocMod1CouplingLayer, FlocModCouplingUpper, FlocModCouplingMiddle, FlocModCouplingLower, FlocMod1CouplingFrz, FlocMod1PipeLayer, FlocModLongPipeUpper, FlocModLongPipeMiddle, FlocModLongPipeLower, FlocMod1PipeFrz, FlocModConnectPipeLayer, FlocModConnectorPipeUpper, FlocModConnectorPipeMiddle, FlocModConnectorPipeLower, FlocModConnectPipeFrz, FlocMod1SpacerNO, FlocModThawArray, FlocShortBaffleSpacers1, FlocMod1SpacerFrz, FlocModCapsEnd, FlocModCouplingsEnd, EndFlocModConPipe, FlocModShortAndEndPipes, ThawFlocMod1Components, ArrayTankModules, MirrorTankModules, FrzFlocModComponents) if N_FlocChannelBafflesShort[0] > 2 and (N_FlocChannels > 2 or N_SedBays == 1 and N_SedTanks == 1)
    stack(FlocMod1CapLayer, FlocModLargeCapUpper, FlocModLargeCapMiddle, FlocModLargeCapLower, FlocModFittedCapUpper, FlocModFittedCapMiddle, FlocModFittedCapLower, FlocMod1CapFrz, FlocMod1CouplingLayer, FlocModCouplingUpper, FlocModCouplingMiddle, FlocModCouplingLower, FlocMod1CouplingFrz, FlocMod1PipeLayer, FlocModLongPipeUpper, FlocModLongPipeMiddle, FlocModLongPipeLower, FlocMod1PipeFrz, FlocModConnectPipeLayer, FlocModConnectorPipeUpper, FlocModConnectorPipeMiddle, FlocModConnectorPipeLower, FlocModConnectPipeFrz, FlocMod1SpacerNO, FlocModThawArray, FlocModCapsEnd, EndFlocModConPipe, FlocModShortAndEndPipes, ThawFlocMod1Components, ArrayTankModules, MirrorTankModules, FrzFlocModComponents) if N_FlocChannelBafflesShort[0] < 2 and N_FlocChannels == 2 and (N_SedBays ≠ 1 or N_SedTanks ≠ 1)
    stack(FlocMod1CapLayer, FlocModLargeCapUpper, FlocModLargeCapMiddle, FlocModLargeCapLower, FlocModFittedCapUpper, FlocModFittedCapMiddle, FlocModFittedCapLower, FlocMod1CapFrz, FlocMod1CouplingLayer, FlocModCouplingUpper, FlocModCouplingMiddle, FlocModCouplingLower, FlocMod1CouplingFrz, FlocMod1PipeLayer, FlocModLongPipeUpper, FlocModLongPipeMiddle, FlocModLongPipeLower, FlocMod1PipeFrz, FlocModConnectPipeLayer, FlocModConnectorPipeUpper, FlocModConnectorPipeMiddle, FlocModConnectorPipeLower, FlocModConnectPipeFrz, FlocMod1SpacerNO, FlocModThawArray, FlocShortBaffleSpacers1, FlocMod1SpacerFrz, FlocModCapsEnd, FlocModCouplingsEnd, EndFlocModConPipe, FlocModShortAndEndPipes, ThawFlocMod1Components, FrzFlocModComponents) otherwise
# NO for nonoverlapping
LargeCapLastNO_Origin := [
    Floc_Origin[0] + X_FlocBaffles[N_FlocChannelBaffles[last(N_FlocChannelBaffles)] - 1, cols(X_FlocBaffles) - 1] + CapThickness(ND_FlocModulesLarge) - L_Sed;
    Floc_Origin[1] - 2*S_Fitting + W_FlocChannel;
    Floc_Origin[2] + L_FlocBaffleLower - 0.5*(L_FlocBaffleLower + L_FlocBaffleUpper - (H_Floc - 0.5*H_PlantFreeboard))
]
FittedCapLastNO_Origin := [-T_FlocBaffle - CapThickness(ND_FlocModulesLarge) - CapThickness(ND_FlocModulesMain); 0 m; 0 m] + LargeCapLastNO_Origin
FlocModCouplingLastNO_Origin := FittedCapLastNO_Origin + [-L_FlocModuleLong[last(L_FlocModuleLong)]; 0 m; 0 m]
ConnectorPipeLastNO_Origin := FlocModCouplingLastNO_Origin + [-CouplingLength(ND_FlocModulesMain) + 2*SocketDepth(ND_FlocModulesMain); 0 m; 0 m]
# FrzFlocModComponents
# SelectFlocModPipeCap
FlocModLargeCapLastUpper := CapF([
    LargeCapLastNO_Origin[0] - B_FlocBaffle[last(B_FlocBaffle)];
    LargeCapLastNO_Origin[1];
    Floc_Origin[2] + H_Floc - 0.5*H_PlantFreeboard - S_Fitting - ConRadius(ND_FlocModulesLarge)
], [180; 0]*deg, ND_FlocModulesLarge)
FlocModLargeCapLastMiddle := CapF(LargeCapLastNO_Origin, [180; 0]*deg, ND_FlocModulesLarge)
FlocModLargeCapLastLower := CapF([
    LargeCapLastNO_Origin[0];
    LargeCapLastNO_Origin[1];
    Floc_Origin[2] + S_Fitting + L_BafflePort + ConRadius(ND_FlocModulesLarge)
], [180; 0]*deg, ND_FlocModulesLarge)
FlocModFittedCapLastUpper := CapF([
    FittedCapLastNO_Origin[0] - B_FlocBaffle[last(B_FlocBaffle)];
    FittedCapLastNO_Origin[1];
    Floc_Origin[2] + H_Floc - 0.5*H_PlantFreeboard - S_Fitting - ConRadius(ND_FlocModulesLarge)
], [0; 0]*deg, ND_FlocModulesMain)
FlocModFittedCapLastMiddle := CapF(FittedCapLastNO_Origin, [0; 0]*deg, ND_FlocModulesMain)
FlocModFittedCapLastLower := CapF([
    FittedCapLastNO_Origin[0];
    FittedCapLastNO_Origin[1];
    Floc_Origin[2] + S_Fitting + L_BafflePort + ConRadius(ND_FlocModulesLarge)
], [0; 0]*deg, ND_FlocModulesMain)
# array after every time a cap is drawn
ArrayFlocModXCapL := ArrayLast(1, N_FlocChannelModulesLong[last(N_FlocChannelModulesLong)] + 1*(N_FlocChannelBafflesShort[last(N_FlocChannelBafflesShort)] > 0), -(B_FlocBaffle[last(B_FlocBaffle)]*N_FlocChannelBafflesLong[last(N_FlocChannelBafflesLong)]))
# FlocModCapFrz
FlocMod1CouplingSelect := SelectLayer("FlocModCouplingPlu")
FlocModCouplingLastUpper := CouplingF([
    FittedCapLastNO_Origin[0] - L_FlocModuleLongOuter[last(L_FlocModuleLong)] - B_FlocBaffle[last(B_FlocBaffle)];
    FlocModCouplingLastNO_Origin[1];
    Floc_Origin[2] + H_Floc - 0.5*H_PlantFreeboard - S_Fitting - ConRadius(ND_FlocModulesLarge)
], [0; 0]*deg, ND_FlocModulesMain, PS_Modules)
FlocModCouplingLastMiddle := CouplingF(FlocModCouplingLastNO_Origin, [0; 0]*deg, ND_FlocModulesMain, PS_Modules)
FlocModCouplingLastLower := CouplingF([
    FittedCapLastNO_Origin[0] - L_FlocModuleLongOuter[last(L_FlocModuleLong)];
    FlocModCouplingLastNO_Origin[1];
    Floc_Origin[2] + S_Fitting + L_BafflePort + ConRadius(ND_FlocModulesLarge)
], [0; 0]*deg, ND_FlocModulesMain, PS_Modules)
ArrayFlocModXConnectL := ArrayLast(1, N_FlocChannelModulesLong[last(N_FlocChannelModulesLong)] - 1, -(B_FlocBaffle[last(B_FlocBaffle)]*N_FlocChannelBafflesLong[last(N_FlocChannelBafflesLong)]))
ArrayFlocModXLastNO := ArrayLast(1, N_FlocChannelModulesLong[last(N_FlocChannelModulesLong)], -(B_FlocBaffle[last(B_FlocBaffle)]*N_FlocChannelBafflesLong[last(N_FlocChannelBafflesLong)]))
FlocMod1CouplingFrz := FreezeLayer("FlocModCouplingPlu")
FlocModCouplingsLast := stack(FlocMod1CouplingSelect, FlocModCouplingLastUpper, ArrayFlocModXLastNO, FlocModCouplingLastMiddle, ArrayFlocModXLastNO, FlocModCouplingLastLower, ArrayFlocModXLastNO, FlocMod1CouplingFrz)
FlocMod1PipeSelect := SelectLayer("FlocModPipePlu")
FlocModLongPipeLastUpper := PipeF([
    FittedCapLastNO_Origin[0] - B_FlocBaffle[last(B_FlocBaffle)];
    FittedCapLastNO_Origin[1];
    Floc_Origin[2] + H_Floc - 0.5*H_PlantFreeboard - S_Fitting - ConRadius(ND_FlocModulesLarge)
], L_FlocModuleLongOuter[last(L_FlocModuleLongOuter)], [0; 0]*deg, ND_FlocModulesMain, PS_Modules)
FlocModLongPipeLastMiddle := PipeF(FittedCapLastNO_Origin, L_FlocModuleLong[last(L_FlocModuleLong)], [0; 0]*deg, ND_FlocModulesMain, PS_Modules)
FlocModLongPipeLastLower := PipeF([
    FittedCapLastNO_Origin[0];
    FittedCapLastNO_Origin[1];
    Floc_Origin[2] + S_Fitting + L_BafflePort + ConRadius(ND_FlocModulesLarge)
], L_FlocModuleLongOuter[last(L_FlocModuleLongOuter)], [0; 0]*deg, ND_FlocModulesMain, PS_Modules)
EndFlocModLongPipeLastUpper := PipeF([
    {
        (Floc_Origin[0] - L_Sed + X_FlocBaffles[0, cols(X_FlocBaffles) - 1] - CapThickness(ND_FlocModulesMain) - T_FlocBaffle) if N_FlocChannelBafflesShort[N_FlocChannels - 1] == 2
        (Floc_Origin[0] - L_Sed + X_FlocBaffles[0, cols(X_FlocBaffles) - 1] + SocketDepth(ND_FlocModulesMain) - CouplingLength(ND_FlocModulesMain)) otherwise
    };
    FittedCapLastNO_Origin[1];
    Floc_Origin[2] + H_Floc - 0.5*H_PlantFreeboard - S_Fitting - ConRadius(ND_FlocModulesLarge)
], {
    (X_FlocBaffles[0, cols(X_FlocBaffles) - 1] - CapThickness(ND_FlocModulesMain) - T_FlocBaffle) if N_FlocChannelBafflesShort[N_FlocChannels - 1] == 2
    (X_FlocBaffles[0, cols(X_FlocBaffles) - 1] + SocketDepth(ND_FlocModulesMain) - CouplingLength(ND_FlocModulesMain) - T_FlocBaffle) otherwise
}, [0; 0]*deg, ND_FlocModulesMain, PS_Modules)
EndFlocModLongPipeLastMiddle := PipeF([
    Floc_Origin[0] - L_Sed + X_FlocBaffles[0, cols(X_FlocBaffles) - 1] - T_FlocBaffle + SocketDepth(ND_FlocModulesMain) - CouplingLength(ND_FlocModulesMain);
    FittedCapLastNO_Origin[1];
    FittedCapLastNO_Origin[2]
], X_FlocBaffles[0, cols(X_FlocBaffles) - 1] + SocketDepth(ND_FlocModulesMain) - CouplingLength(ND_FlocModulesMain) - T_FlocBaffle, [0; 0]*deg, ND_FlocModulesMain, PS_Modules)
EndFlocModLongPipeLastLower := PipeF([
    {
        (Floc_Origin[0] - L_Sed + X_FlocBaffles[1, cols(X_FlocBaffles) - 1] - CapThickness(ND_FlocModulesMain) - T_FlocBaffle) if N_FlocChannelBafflesShort[N_FlocChannels - 1] == 2
        (Floc_Origin[0] - L_Sed + X_FlocBaffles[1, cols(X_FlocBaffles) - 1] + SocketDepth(ND_FlocModulesMain) - CouplingLength(ND_FlocModulesMain) - T_FlocBaffle) otherwise
    };
    FittedCapLastNO_Origin[1];
    Floc_Origin[2] + S_Fitting + L_BafflePort + ConRadius(ND_FlocModulesLarge)
], {
    (X_FlocBaffles[1, cols(X_FlocBaffles) - 1] - CapThickness(ND_FlocModulesMain) - T_FlocBaffle) if N_FlocChannelBafflesShort[N_FlocChannels - 1] == 2
    (X_FlocBaffles[1, cols(X_FlocBaffles) - 1] + SocketDepth(ND_FlocModulesMain) - CouplingLength(ND_FlocModulesMain) - T_FlocBaffle) otherwise
}, [0; 0]*deg, ND_FlocModulesMain, PS_Modules)
FlocModLastShortPipeUpper := PipeF([
    {
        (Floc_Origin[0] - L_Sed + X_FlocBaffles[N_FlocChannelBafflesShort[N_FlocChannels - 1] - 2, cols(X_FlocBaffles) - 1] - CapThickness(ND_FlocModulesMain) - T_FlocBaffle) if N_FlocChannelBafflesShort[N_FlocChannels - 1] - 2 ≥ 0
        0 otherwise
    };
    FittedCapLastNO_Origin[1];
    Floc_Origin[2] + H_Floc - 0.5*H_PlantFreeboard - S_Fitting - ConRadius(ND_FlocModulesLarge)
], (N_FlocChannelBafflesShort[N_FlocChannels - 1] - 2)*B_FlocBaffle[last(S_FlocBaffle)] + (SocketDepth(ND_FlocModulesMain) - CapThickness(ND_FlocModulesMain)), [0; 0]*deg, ND_FlocModulesMain, PS_Modules)
FlocModLastShortPipeMiddle := PipeF([
    {
        (Floc_Origin[0] - L_Sed + X_FlocBaffles[N_FlocChannelBafflesShort[N_FlocChannels - 1] - 1, cols(X_FlocBaffles) - 1] - CapThickness(ND_FlocModulesMain) - T_FlocBaffle) if N_FlocChannelBafflesShort[N_FlocChannels - 1] - 1 ≥ 0
        0 otherwise
    };
    FittedCapLastNO_Origin[1];
    FittedCapLastNO_Origin[2]
], (N_FlocChannelBafflesShort[N_FlocChannels - 1] - 1)*B_FlocBaffle[last(S_FlocBaffle)] + SocketDepth(ND_FlocModulesMain) - CapThickness(ND_FlocModulesMain), [0; 0]*deg, ND_FlocModulesMain, PS_Modules)
FlocModLastShortPipeLower := PipeF([
    {
        (Floc_Origin[0] - L_Sed + X_FlocBaffles[N_FlocChannelBafflesShort[N_FlocChannels - 1] - 1, cols(X_FlocBaffles) - 1] - CapThickness(ND_FlocModulesMain) - T_FlocBaffle) if N_FlocChannelBafflesShort[N_FlocChannels - 1] - 1 ≥ 0
        0 otherwise
    };
    FittedCapLastNO_Origin[1];
    Floc_Origin[2] + S_Fitting + L_BafflePort + ConRadius(ND_FlocModulesLarge)
], (N_FlocChannelBafflesShort[N_FlocChannels - 1] - 1)*B_FlocBaffle[last(S_FlocBaffle)] + (SocketDepth(ND_FlocModulesMain) - CapThickness(ND_FlocModulesMain)), [0; 0]*deg, ND_FlocModulesMain, PS_Modules)
# FlocMod1LongPipeFrz
FlocModLastEndPipes :=
    stack(FlocMod1PipeSelect, FlocModLongPipeLastUpper, ArrayFlocModXLastNO, FlocModLongPipeLastMiddle, ArrayFlocModXLastNO, FlocModLongPipeLastLower, ArrayFlocModXLastNO, EndFlocModLongPipeLastUpper, EndFlocModLongPipeLastMiddle, EndFlocModLongPipeLastLower, FlocMod1PipeFrz) if N_FlocChannelBafflesShort[N_FlocChannels - 1] == 0
    stack(FlocMod1PipeSelect, FlocModLongPipeLastUpper, ArrayFlocModXLastNO, FlocModLongPipeLastMiddle, ArrayFlocModXLastNO, FlocModLongPipeLastLower, ArrayFlocModXLastNO, EndFlocModLongPipeLastUpper, EndFlocModLongPipeLastMiddle, EndFlocModLongPipeLastLower, FlocModLastShortPipeMiddle, FlocMod1PipeFrz) if N_FlocChannelBafflesShort[N_FlocChannels - 1] == 2
    stack(FlocMod1PipeSelect, FlocModLongPipeLastUpper, ArrayFlocModXLastNO, FlocModLongPipeLastMiddle, ArrayFlocModXLastNO, FlocModLongPipeLastLower, ArrayFlocModXLastNO, EndFlocModLongPipeLastUpper, EndFlocModLongPipeLastMiddle, EndFlocModLongPipeLastLower, FlocModLastShortPipeUpper, FlocModLastShortPipeMiddle, FlocModLastShortPipeLower, FlocMod1PipeFrz) otherwise
FlocModConnectPipeSelect := SelectLayer("FlocModConnectPipePlu")
FlocModConnectorPipeLastUpper := PipeF([
    ConnectorPipeLastNO_Origin[0];
    ConnectorPipeLastNO_Origin[1];
    Floc_Origin[2] + H_Floc - 0.5*H_PlantFreeboard - S_Fitting - ConRadius(ND_FlocModulesLarge)
], L_FlocModuleConnectorOuter[last(L_FlocModuleConnectorOuter)], [0; 0]*deg, ND_FlocModulesMain, PS_Modules)
FlocModConnectorPipeLastMiddle := PipeF(ConnectorPipeLastNO_Origin, L_FlocModuleConnector[last(L_FlocModuleConnector)], [0; 0]*deg, ND_FlocModulesMain, PS_Modules)
FlocModConnectorPipeLastLower := PipeF([
    ConnectorPipeLastNO_Origin[0] + B_FlocBaffle[last(B_FlocBaffle)];
    ConnectorPipeLastNO_Origin[1];
    Floc_Origin[2] + S_Fitting + L_BafflePort + ConRadius(ND_FlocModulesLarge)
], L_FlocModuleConnectorOuter[last(L_FlocModuleConnectorOuter)], [0; 0]*deg, ND_FlocModulesMain, PS_Modules)
# FlocModConnectPipeFrz
LastFlocModShortPipe :=
    if N_FlocChannelBafflesShort[last(N_FlocChannelBafflesShort)] ≠ 0
        PipeF([
            (Plant_Origin[0] - X_FlocBaffles[N_FlocChannelBafflesLong[last(N_FlocChannelBafflesLong)]*N_FlocChannelModulesLong[last(N_FlocChannelModulesLong)], N_FlocChannels - 1]) - CapThickness(ND_FlocModulesMain) - T_FlocBaffle;
            ConnectorPipeLastNO_Origin[1];
            ConnectorPipeLastNO_Origin[2]
        ], L_FlocModuleShort[last(L_FlocModuleShort)], [0; 0]*deg, ND_FlocModulesMain, PS_Modules)
    "0" otherwise
FlocModEndPipeLast := PipeF([
    Floc_Origin[0] - X_FlocBaffles[N_FlocChannelBaffles[last(N_FlocChannelBaffles)] - 1, N_FlocChannels - 1] - T_FlocBaffle - CouplingLength(ND_FlocModulesMain) + SocketDepth(ND_FlocModulesMain);
    FittedCapLastNO_Origin[1];
    FittedCapLastNO_Origin[1]
], L_Sed - X_FlocBaffles[N_FlocChannelBaffles[last(N_FlocChannelBaffles)] - 1, N_FlocChannels - 1] - CouplingLength(ND_FlocModulesMain) + SocketDepth(ND_FlocModulesMain) - T_FlocBaffle, [0; 0]*deg, ND_FlocModulesMain, PS_Modules)
# FlocModPipeFrz
FlocModSpacerPipeLastMiddle :=
    Local ← stack(SelectLayer("FlocModSpacerPlu"), PipeF([
        CapThickness(ND_FlocModulesMain) - CapHeight(ND_FlocModulesMain) + FittedCapLastNO_Origin[0];
        FittedCapLastNO_Origin[1];
        ConnectorPipeLastNO_Origin[2]
    ], S_FlocBaffle[N_FlocChannels - 1] - CapHeight(ND_FlocModulesMain), [0; 0]*deg, ND_SpacerPipe, PS_Modules), ArrayFlocModXLastNO)
    for i ∈ 0 .. N_FlocChannelBafflesLong[N_FlocChannels - 1] - 3
        Local ← stack(Local, PipeF([
            CapThickness(ND_FlocModulesMain) - B_FlocBaffle[N_FlocChannels - 1]*(i + 1) + FittedCapLastNO_Origin[0];
            FittedCapLastNO_Origin[1];
            ConnectorPipeLastNO_Origin[2]
        ], S_FlocBaffle[N_FlocChannels - 1], [0; 0]*deg, ND_SpacerPipe, PS_Modules), ArrayFlocModXLastNO)
    Local
FlocModSpacerUpperLast :=
    Local ← stack(PipeF([
        Plant_Origin[0] + X_FlocBaffles[N_FlocChannelBaffles[last(N_FlocChannelBaffles)] - 2, N_FlocChannels - 1] - L_Sed - CapHeight(ND_FlocModulesMain) - T_FlocBaffle;
        FittedCapLastNO_Origin[1];
        Floc_Origin[2] + H_Floc - 0.5*H_PlantFreeboard - S_Fitting - ConRadius(ND_FlocModulesLarge)
    ], 2*S_FlocBaffle[0] - CapHeight(ND_FlocModulesMain) + T_FlocBaffle, [0; 0]*deg, ND_SpacerPipe, PS_Modules), ArrayFlocModXLastNO)
    if N_FlocChannelBafflesLong[N_FlocChannels - 1] > 5
        for i ∈ 1 .. N_FlocChannelBafflesLong[N_FlocChannels - 1]/2 - 2
            Local ← stack(Local, PipeF([
                Plant_Origin[0] + X_FlocBaffles[N_FlocChannelBaffles[last(N_FlocChannelBaffles)] - 2, N_FlocChannels - 1] - T_FlocBaffle - L_Sed - 2*B_FlocBaffle[last(B_FlocBaffle)]*i;
                FittedCapLastNO_Origin[1];
                Floc_Origin[2] + H_Floc - 0.5*H_PlantFreeboard - S_Fitting - ConRadius(ND_FlocModulesLarge)
            ], 2*S_FlocBaffle[0] + T_FlocBaffle, [0; 0]*deg, ND_SpacerPipe, PS_Modules), ArrayFlocModXLastNO)
    Local
FlocModSpacerLowerLast :=
    Local ← stack(PipeF([
        Plant_Origin[0] - T_FlocBaffle + X_FlocBaffles[N_FlocChannelBaffles[last(N_FlocChannelBaffles)] - 1, N_FlocChannels - 1] - L_Sed - CapHeight(ND_FlocModulesMain);
        FittedCapLastNO_Origin[1];
        Floc_Origin[2] + S_Fitting + L_BafflePort + ConRadius(ND_FlocModulesLarge)
    ], 2*S_FlocBaffle[0] - CapHeight(ND_FlocModulesMain) + T_FlocBaffle, [0; 0]*deg, ND_SpacerPipe, PS_Modules), ArrayFlocModXLastNO)
    if N_FlocChannelBafflesLong[N_FlocChannels - 1] > 5
        for i ∈ 1 .. N_FlocChannelBafflesLong[N_FlocChannels - 1]/2 - 2
            Local ← stack(Local, PipeF([
                Plant_Origin[0] + X_FlocBaffles[N_FlocChannelBaffles[last(N_FlocChannelBaffles)] - 1, N_FlocChannels - 1] - L_Sed - 2*i*B_FlocBaffle[last(B_FlocBaffle)];
                FittedCapLastNO_Origin[1];
                Floc_Origin[2] + S_Fitting + L_BafflePort + ConRadius(ND_FlocModulesLarge)
            ], 2*S_FlocBaffle[0] + T_FlocBaffle, [0; 0]*deg, ND_SpacerPipe, PS_Modules), ArrayFlocModXLastNO)
    Local
FlocModSpacerPipeLastShortMiddle1 :=
    if N_FlocChannelBafflesShort[last(N_FlocChannelBafflesShort)] ≠ 0
        PipeF([
            Plant_Origin[0] - T_FlocBaffle - L_Sed + X_FlocBaffles[N_FlocChannelBafflesShort[last(N_FlocChannelBafflesShort)] - 1, N_FlocChannels - 1] - CapHeight(ND_FlocModulesMain);
            FittedCapLastNO_Origin[1];
            ConnectorPipeLastNO_Origin[2]
        ], S_FlocBaffle[N_FlocChannels - 1] - CapHeight(ND_FlocModulesMain), [0; 0]*deg, ND_SpacerPipe, PS_Modules)
    "0" otherwise
FlocModSpacerPipeLastShortMiddle2 :=
    if N_FlocChannelBafflesShort[last(N_FlocChannelBafflesShort)] ≥ 2
        PipeF([
            Plant_Origin[0] - T_FlocBaffle - L_Sed + X_FlocBaffles[N_FlocChannelBafflesShort[last(N_FlocChannelBafflesShort)] - 2, N_FlocChannels - 1] - CapHeight(ND_FlocModulesMain);
            FittedCapLastNO_Origin[1];
            ConnectorPipeLastNO_Origin[2]
        ], S_FlocBaffle[N_FlocChannels - 1], [0; 0]*deg, ND_SpacerPipe, PS_Modules)
    "0" otherwise
ArrayModSpacerShortLast := ArrayLast(1, N_FlocChannelBafflesShort[last(N_FlocChannelBafflesShort)] - 2, -B_FlocBaffle[last(B_FlocBaffle)])
FlocModSpacerPipeLastShortUpper1 :=
    if N_FlocChannelBafflesShort[last(N_FlocChannelBafflesShort)] ≥ 2
        PipeF([
            Plant_Origin[0] - T_FlocBaffle - L_Sed + X_FlocBaffles[N_FlocChannelBafflesShort[last(N_FlocChannelBafflesShort)] - 2, N_FlocChannels - 1] - CapHeight(ND_FlocModulesMain);
            FittedCapLastNO_Origin[1];
            ConnectorPipeLastNO_Origin[2]
        ], S_FlocBaffle[N_FlocChannels - 1] - CapHeight(ND_FlocModulesMain), [0; 0]*deg, ND_SpacerPipe, PS_Modules)
    "0" otherwise
FlocModSpacerPipeLastShortUpper2 :=
    if N_FlocChannelBafflesShort[last(N_FlocChannelBafflesShort)] ≥ 3
        PipeF([
            Plant_Origin[0] - T_FlocBaffle - L_Sed + X_FlocBaffles[N_FlocChannelBafflesShort[last(N_FlocChannelBafflesShort)] - 3, N_FlocChannels - 1] - CapHeight(ND_FlocModulesMain);
            FittedCapLastNO_Origin[1];
            ConnectorPipeLastNO_Origin[2]
        ], S_FlocBaffle[N_FlocChannels - 1], [0; 0]*deg, ND_SpacerPipe, PS_Modules)
    "0" otherwise
FlocModSpacerPipeLastShortLower1 :=
    if N_FlocChannelBafflesShort[last(N_FlocChannelBafflesShort)] ≠ 0
        PipeF([
            Plant_Origin[0] - T_FlocBaffle - L_Sed + X_FlocBaffles[N_FlocChannelBafflesShort[last(N_FlocChannelBafflesShort)] - 1, N_FlocChannels - 1] - CapHeight(ND_FlocModulesMain);
            FittedCapLastNO_Origin[1];
            ConnectorPipeLastNO_Origin[2]
        ], S_FlocBaffle[N_FlocChannels - 1] - CapHeight(ND_FlocModulesMain), [0; 0]*deg, ND_SpacerPipe, PS_Modules)
    "0" otherwise
FlocModSpacerPipeLastShortLower2 :=
    if N_FlocChannelBafflesShort[last(N_FlocChannelBafflesShort)] ≥ 2
        PipeF([
            Plant_Origin[0] - T_FlocBaffle - L_Sed + X_FlocBaffles[N_FlocChannelBafflesShort[last(N_FlocChannelBafflesShort)] - 2, N_FlocChannels - 1] - CapHeight(ND_FlocModulesMain);
            FittedCapLastNO_Origin[1];
            ConnectorPipeLastNO_Origin[2]
        ], S_FlocBaffle[N_FlocChannels - 1], [0; 0]*deg, ND_SpacerPipe, PS_Modules)
    "0" otherwise
ArrayModSpacerShortLastOuter := ArrayLast(1, (N_FlocChannelBafflesShort[last(N_FlocChannelBafflesShort)] - 2)/2, -2*B_FlocBaffle[last(B_FlocBaffle)])
FlocMod1SpacerNOLast :=
    stack(FlocModSpacerPipeLastMiddle, FlocModSpacerUpperLast, FlocModSpacerLowerLast, FlocMod1SpacerFrz) if N_FlocChannelBafflesShort[last(N_FlocChannelBafflesShort)] == 0
    stack(FlocModSpacerPipeLastMiddle, FlocModSpacerUpperLast, FlocModSpacerLowerLast, FlocModSpacerPipeLastShortMiddle1, FlocMod1SpacerFrz) if N_FlocChannelBafflesShort[last(N_FlocChannelBafflesShort)] == 2
    stack(FlocModSpacerPipeLastMiddle, FlocModSpacerUpperLast, FlocModSpacerLowerLast, FlocModSpacerPipeLastShortMiddle1, FlocModSpacerPipeLastShortMiddle2, ArrayModSpacerShortLast, FlocMod1SpacerFrz) if N_FlocChannelBafflesShort[last(N_FlocChannelBafflesShort)] == 4
    stack(FlocModSpacerPipeLastMiddle, FlocModSpacerUpperLast, FlocModSpacerLowerLast, FlocModSpacerPipeLastShortMiddle1, FlocModSpacerPipeLastShortMiddle2, ArrayModSpacerShortLast, FlocModSpacerPipeLastShortUpper1, FlocModSpacerPipeLastShortLower1, FlocMod1SpacerFrz) if N_FlocChannelBafflesShort[last(N_FlocChannelBafflesShort)] == 6
    stack(FlocModSpacerPipeLastMiddle, FlocModSpacerUpperLast, FlocModSpacerLowerLast, FlocModSpacerPipeLastShortMiddle1, FlocModSpacerPipeLastShortMiddle2, ArrayModSpacerShortLast, FlocModSpacerPipeLastShortUpper1, ArrayModSpacerShortLastOuter, FlocModSpacerPipeLastShortLower1, ArrayModSpacerShortLastOuter, FlocMod1SpacerFrz) otherwise
# SelectFlocModCoupling
FlocModCouplingLastEndUpper := CouplingF([
    Floc_Origin[0] - L_Sed + X_FlocBaffles[0, N_FlocChannels - 1] - SocketDepth(ND_FlocModulesMain) - T_FlocBaffle;
    FittedCapLastNO_Origin[1];
    Floc_Origin[2] + H_Floc - 0.5*H_PlantFreeboard - S_Fitting - ConRadius(ND_FlocModulesLarge)
], [0; 0]*deg, ND_FlocModulesMain, PS_Modules)
FlocModCouplingLastEndMiddle := CouplingF([
    Floc_Origin[0] - L_Sed + X_FlocBaffles[0, N_FlocChannels - 1] - SocketDepth(ND_FlocModulesMain) - T_FlocBaffle;
    FittedCapLastNO_Origin[1];
    ConnectorPipeLastNO_Origin[2]
], [0; 0]*deg, ND_FlocModulesMain, PS_Modules)
FlocModCouplingLastEndLower := CouplingF([
    Floc_Origin[0] - L_Sed + X_FlocBaffles[1, N_FlocChannels - 1] - SocketDepth(ND_FlocModulesMain) - T_FlocBaffle;
    FittedCapLastNO_Origin[1];
    Floc_Origin[2] + S_Fitting + L_BafflePort + ConRadius(ND_FlocModulesLarge)
], [0; 0]*deg, ND_FlocModulesMain, PS_Modules)
# FlocModCouplingFrz
EndLastModCouplings :=
    stack(SelectFlocMod1Coupling, FlocModCouplingLastEndMiddle, FlocMod1CouplingFrz) if N_FlocChannelBafflesShort[last(N_FlocChannelBafflesShort)] == 2
    stack(SelectFlocMod1Coupling, FlocModCouplingLastEndUpper, FlocModCouplingLastEndMiddle, FlocModCouplingLastEndLower, FlocMod1CouplingFrz) otherwise
FlocModSpacerShortLast :=
    stack(SelectFlocMod1Spacer, FlocModSpacerPipeLastShort1, FlocMod1SpacerFrz) if N_FlocChannelBafflesShort[last(N_FlocChannelBafflesShort)] == 2
    stack(SelectFlocMod1Spacer, FlocModSpacerPipeLastShort1, FlocModSpacerPipeLastShort2, ArrayModSpacerShortLast, FlocMod1SpacerFrz) otherwise
FlocModLastNO :=
    stack(SelectFlocMod1PipeCap, FlocModLargeCapLastUpper, ArrayFlocModXCapL, FlocModLargeCapLastMiddle, ArrayFlocModXCapL, FlocModLargeCapLastLower, ArrayFlocModXCapL, FlocModFittedCapLastUpper, ArrayFlocModXCapL, FlocModFittedCapLastMiddle, ArrayFlocModXCapL, FlocModFittedCapLastLower, ArrayFlocModXCapL, FlocMod1CapFrz, FlocMod1SpacerNOLast, FlocModCouplingsLast, FlocModLastEndPipes, FlocModConnectPipeSelect, FlocModConnectorPipeLastUpper, ArrayFlocModXConnectL, FlocModConnectorPipeLastMiddle, ArrayFlocModXConnectL, FlocModConnectorPipeLastLower, ArrayFlocModXConnectL, FlocModConnectPipeFrz) if N_FlocChannelBafflesShort[last(N_FlocChannelBafflesShort)] == 0
    stack(SelectFlocMod1PipeCap, FlocModLargeCapLastUpper, ArrayFlocModXCapL, FlocModLargeCapLastMiddle, ArrayFlocModXCapL, FlocModLargeCapLastLower, ArrayFlocModXCapL, FlocModFittedCapLastUpper, ArrayFlocModXCapL, FlocModFittedCapLastMiddle, ArrayFlocModXCapL, FlocModFittedCapLastLower, ArrayFlocModXCapL, FlocMod1CapFrz, FlocMod1SpacerNOLast, FlocModCouplingsLast, FlocModLastEndPipes, FlocModConnectPipeSelect, FlocModConnectorPipeLastUpper, ArrayFlocModXLastNO, FlocModConnectorPipeLastMiddle, ArrayFlocModXLastNO, FlocModConnectorPipeLastLower, ArrayFlocModXLastNO, FlocModConnectPipeFrz, EndLastModCouplings) otherwise
ThawAllFlocModules := ThawMultiple(["FlocMod*Plu"])
# ArrayModulesY array new pipes to within 0.05m of each wall.
# ArrayFlocModY
FlocModulesNonOverlapping :=
    FlocMod1NoOverlap if N_SedTanks == 1 and N_SedBays == 1
    stack(FlocMod1NoOverlap, FlocModLastNO, ThawAllFlocModules, ArrayFlocModY, FrzFlocModComponents)
FlocModules :=
    FlocModulesOverlapping if EN_ModuleIdentical == 1
    FlocModulesNonOverlapping otherwise
FlocBaffleLayerH := layer_new("FlocModBaffles", ltpurple)
FreezeFlocBafflesH := FreezeLayer("FlocModBaffles")
FlocTankBaffleScriptH :=
    Local ← "null" if EN_FlocHoriz ≠ 1
    otherwise
        Local ← FlocBaffleLayerH
        for i ∈ 0 .. (N_FlocChannels - 1)
            for j ∈ 0 .. 1
                Local ← stack(Local, BoxF([Floc_Origin[0] - L_Sed; -L_Slot; Floc_Origin[2]] + [X_FlocBaffles[j, i]; Y_FlocBaffles[j, i]; Z_FlocBaffles[j, i]], [Floc_Origin[0] - L_Sed; -L_Slot; Floc_Origin[2]] + [X_FlocBaffles[j, i]; Y_FlocBaffles[j, i]; Z_FlocBaffles[j, i]] + [T_FlocBaffle; L_FlocBaffles[j, i]; H_Floc], [0; 0; 0]*deg))
                Local ← stack(Local, ArrayLast(1, N_FlocChannelBaffles[i]/2, 2*B_FlocBaffle[i]))
    Local ← stack(Local, FreezeFlocBafflesH)
    return Local
FlocTankDrainCouplingScript :=
    Local ← layer_new("FlocDrainCouplingPlu", green)
    for i ∈ 0 .. last(Y_FlocDrainValves)
        Local ← stack(Local, CouplingSUBF([-L_Sed - SocketDepth(ND_FlocValve); Y_FlocDrainValves[i]; Floc_Origin[2]], [0; 0]*deg, ND_FlocValve, PS_Default, ["FlocTankCon"]))
    return stack(Local, FreezeLayer("FlocDrainCouplingPlu"))
FlocTankDrainPipeScript :=
    Local ← layer_new("FlocDrainPipePlu", blue)
    for i ∈ 0 .. last(Y_FlocDrainValves)
        Local ← stack(Local, PipeSUBF([
            -L_Sed - CouplingLength(ND_FlocValve) + SocketDepth(ND_FlocValve);
            Y_FlocDrainValves[i];
            Floc_Origin[2]
        ], max(T_PlantWall - CouplingLength(ND_FlocValve), 0 m) + 2*SocketDepth(ND_FlocValve), [0; 0]*deg, ND_FlocValve, PS_Default, ["FlocTankCon"]))
    return stack(Local, FreezeLayer("FlocDrainPipePlu"))
FlocDrainAdapterLayer := layer_new("FlocDrainAdapterPlu", blue3)
DrawFlocDrainAdapter1 := MaleAdapterF(FlocAdapter1_Origin, [0; 0]*deg, ND_FlocValve, PS_Default)
FlocTankDrainAdapterScript := stack(FlocDrainAdapterLayer, DrawFlocDrainAdapter1, FreezeLayer("FlocDrainAdapterPlu"))
FlocDrainValveLayer := layer_new("FlocDrainValvePlu", blue3)
InsertFlocDrainValve := insertdwg("https://confluence.cornell.edu/download/attachments/173604905/Floc-Scaled-Gate-Valve-Threaded.dwg", FlocValve_Origin, D_FlocScale, D_FlocScale, 0 deg)
FlocTankDrainValveScript := stack(FlocDrainValveLayer, InsertFlocDrainValve, FreezeLayer("FlocDrainValvePlu"))
ThawFlocDrains := ThawMultiple(["FlocDrainAdapterPlu"; "FlocDrainValvePlu"])
ArrayFlocDrains := array_all(ceil(N_FlocChannels/2), 1, 2*(W_FlocChannel + T_PlantWall))
FreezeDrains := FreezeMultiple(["FlocDrainAdapterPlu"; "FlocDrainValvePlu"])
FlocDrainArray := stack(ThawFlocDrains, ArrayFlocDrains, FreezeDrains)
FlocRMLayer := layer_new("FlocRMCouplingPlu", green)
DrawFlocRMCoupling := CouplingSUBF(FlocCoupling_Origin, [270; 0]*deg, ND_RMPipe, PS_Default, ["FlocTankCon"])  # FlocModPipeFrz
FreezeFlocRMCoupling := FreezeLayer("FlocRMCouplingPlu")
# Orifice Plate
LayerRMOrificePlate := layer_new("FlocRmOrificePlate", red)
RMOrificePlate := CylinderF([
    FlocCoupling_Origin[0];
    Floc_Origin[1] + N_FlocChannels*W_FlocChannel + (N_FlocChannels - 1)*T_PlantWall - L_FlocCouplingExt + SocketDepth(ND_RMPipe);
    FlocCoupling_Origin[2]
], outerradius(ND_RMPipe), T_RMOrificePlate, [90; 0; 0]*deg)
FreezeRMOrificePlate := FreezeLayer("FlocRmOrificePlate")
D_RMOrifice := D_PipeED(E_MaxRM, Q_Plant, Pi_VenaContractaOrifice, Pi_Jet) = 0.177865 m
RMOrifice := CylinderF([
    FlocCoupling_Origin[0];
    Floc_Origin[1] + N_FlocChannels*W_FlocChannel + (N_FlocChannels - 1)*T_PlantWall - L_FlocCouplingExt + SocketDepth(ND_RMPipe);
    FlocCoupling_Origin[2]
], D_RMOrifice/2, T_RMOrificePlate, [90; 0; 0]*deg)
SubtractRMOrifice := SubtractF(["FlocRmOrificePlate"], "DeleteMe")
RMOrificePlateScript := stack(LayerRMOrificePlate, RMOrificePlate, FreezeRMOrificePlate, RMOrifice, GroupDelete, SubtractRMOrifice)
FlocRMPlateHolderLayer := layer_new("FlocRmPlateHolder", red)
RMOrificePlateHolderStub := PipeF([
    FlocCoupling_Origin[0];
    Floc_Origin[1] + N_FlocChannels*W_FlocChannel + (N_FlocChannels - 1)*T_PlantWall - L_FlocCouplingExt + SocketDepth(ND_RMPipe) - T_RMOrificePlate;
    FlocCoupling_Origin[2]
], SocketDepth(ND_RMPipe), [90; 0; 0]*deg, ND_RMPipe, PS_Default)
FlocRmPlateHolderFrz := FreezeLayer("FlocRmPlateHolder")
# Orifice Plate Rod
D_RMOrificePlateRod := 3/8*in
OrificePlateRodLayer := layer_new("FlocOrificePlateRod", black)
OrificePlateRod := CylinderF([
    FlocCoupling_Origin[0];
    Floc_Origin[1] + N_FlocChannels*W_FlocChannel + (N_FlocChannels - 1)*T_PlantWall - L_FlocCouplingExt/2;
    FlocCoupling_Origin[2] + ConRadius(ND_RMPipe) + zc
], D_RMOrificePlateRod, OuterDiameterFittingPVC(ND_RMPipe) + 2*zc, [0; 270; 0]*deg)
FreezeOrificePlateRod := FreezeLayer("FlocOrificePlateRod")
SubtractOrificePlateRodCoupling := SubtractF(["FlocRMCouplingPlu"], "DeleteMe")
SubtractOrificePlateRodPipe := SubtractF(["FlocRmPlateHolder"], "DeleteMe")
OrificePlateRodScript := stack(OrificePlateRod, GroupDelete, SubtractOrificePlateRodCoupling, OrificePlateRod, GroupDelete, SubtractOrificePlateRodPipe, OrificePlateRodLayer, OrificePlateRod, FreezeOrificePlateRod)
FlocRMScript := stack(FlocRMLayer, DrawFlocRMCoupling, FreezeFlocRMCoupling, RMOrificePlateScript, FlocRMPlateHolderLayer, RMOrificePlateHolderStub, FlocRmPlateHolderFrz, OrificePlateRodScript)
AC_FlocTank :=
    stack(FlocTankScript, FlocTankBaffleScriptH, FlocTankDrainCouplingScript, FlocTankDrainPipeScript, FlocTankDrainAdapterScript, FlocTankDrainValveScript, FlocRMScript) if EN_FlocHoriz == 1 and N_FlocChannels ≤ 2
    stack(FlocTankScript, FlocTankBaffleScriptH, FlocTankDrainCouplingScript, FlocTankDrainPipeScript, FlocTankDrainAdapterScript, FlocTankDrainValveScript, FlocDrainArray, FlocRMScript) if EN_FlocHoriz == 1 and N_FlocChannels > 2
    stack(FlocTankScript, FlocTankBaffleScriptV, FlocModules, FlocTankDrainCouplingScript, FlocTankDrainPipeScript, FlocTankDrainAdapterScript, FlocTankDrainValveScript, FlocRMScript) if EN_FlocHoriz == 0 and N_FlocChannels ≤ 2
    stack(FlocTankScript, FlocTankBaffleScriptV, FlocModules, FlocTankDrainCouplingScript, FlocTankDrainPipeScript, FlocTankDrainAdapterScript, FlocTankDrainValveScript, FlocDrainArray, FlocRMScript) otherwise
# Previews
# [reference: LayoutsAC.xmcd]
# Display Variables
Q_Plant = 0.02 m^3/s
AC_FlocTank =  # no stored result
AI_Preview =  # error: This variable is undefined.
