# Code created by Heidi Rausch (her28@cornell.edu)
# LFOM Modular Design
# User Inputs
Q_Plant := 10*L/s
# To be left undefined and inputed online by the user
# From Expert Inputs
# [reference: ExpertInputs.xmcd]
# Design References
# [reference: MathFunctions.xmcd]
# [reference: PipeDatabase.xmcd]
# [reference: MaterialsDatabase.xmcd]
# [reference: FluidsFunctions.xmcd]
# [reference: LFOM.xmcd]
# LFOM Code
# [reference: MtoATranslators.xmcd]
# [reference: MtoATranslatorsWrapped.xmcd]
# [reference: PlumbingF.xmcd]
# [reference: LfomAC_ss2938.xmcd]
# LFOM Orifices Template
L_Paper := 10.5 in
# Values of L.Paper and W.Paper can be changed depending on the desired paper size. 7.5" x 10.5" were chosen to give a .5" margin on either side of the paper to account for differences in printer margin settings.
W_Paper := 7.5 in
XStartPoint := LFOM_Origin[0]
# This origin is defined in the LFOM modular code.
YStartPoint := LFOM_Origin[1]
OrificeCenterDist := D_LfomOrifices + S_LfomOrificesMin
# The length of the layouts -- this was originally written to fall between orifices, but with the offset of alternating rows by half the orifice diameter, the border fell directly on the center line of the orifice. This would pose a problem when piecing the sheets together on-site, as the orifice center may not be exact. L.Border is offset by the orifice diameter to avoid this issue.
L_Border := floor(L_Paper/OrificeCenterDist)*OrificeCenterDist - D_LfomOrifices
W_Border := floor(W_Paper/(H_LfomOrifices[1] - H_LfomOrifices[0]))*(H_LfomOrifices[1] - H_LfomOrifices[0])
# The width of the layouts -- this is as close as possible to W.Paper without cutting off any orifices.
Labels := ["A"; "B"; "C"; "D"; "E"; "F"; "G"; "H"; "I"; "J"; "K"; "L"; "M"; "O"; "P"]
LabelLayout(Text, TextSize, Start, End, Rotation) := concat("-mtext ", point(Start), sp, "height ", stringit(TextSize), sp, "r ", stringit(Rotation), sp, point(End), sp, Text)
CreateLayout(LayoutName) := concat("-layout ", "n ", stringit(LayoutName), sp)
SetLayout(LayoutName) := concat("-layout ", "s ", stringit(LayoutName), sp)
VPortErase(VPort1, VPort2) := concat(".erase ", point(VPort1), sp, point(VPort2), sp)
VPortNew(Corner1, Corner2) := concat("-vport ", point(Corner1), sp, point(Corner2), sp, "z ", "e")
ChangeView(CornerA, CornerB) := concat("ms ", "z ", "w ", point(CornerA), sp, point(CornerB), sp, "ps")
N_HLayouts :=
    Layouts ← round((OrificeCenterDist*N_LfomOrifices[0] + D_LfomOrifices)/L_Border) if (OrificeCenterDist*N_LfomOrifices[0] + D_LfomOrifices)/L_Border > 1.5
    Layouts ← ceil((OrificeCenterDist*N_LfomOrifices[0] + D_LfomOrifices)/L_Border) if (OrificeCenterDist*N_LfomOrifices[0] + D_LfomOrifices)/L_Border < 1.5
    return Layouts
N_VLayouts := round((H_LfomOrifices[last(H_LfomOrifices)] + D_LfomOrifices/2)/W_Border)
N_TLayouts :=
    Layouts ← round((OrificeCenterDist*N_LfomOrifices[last(N_LfomOrifices)] + D_LfomOrifices)/L_Border) if (OrificeCenterDist*N_LfomOrifices[last(N_LfomOrifices)] + D_LfomOrifices)/L_Border > 1
    Layouts ← ceil((OrificeCenterDist*N_LfomOrifices[last(N_LfomOrifices)] + D_LfomOrifices)/L_Border) if (OrificeCenterDist*N_LfomOrifices[last(N_LfomOrifices)] + D_LfomOrifices)/L_Border < 1
    return Layouts
SetUpHLayouts(N_Layout) :=
    Num ← 1 m
    Layout ← CreateLayout(Num)
    for a ∈ 1 .. N_Layout
        if a == 1
            Layout ← stack(Layout, SetLayout(Num), VPortErase([0; 0]*m, [10; 7.7]*m), VPortNew([.013; .013]*m, [.013 m + L_Border + D_LfomOrifices/2; W_Border + .013 m]), ChangeView([
                XStartPoint - D_LfomOrifices/2 + ((floor(L_Paper/OrificeCenterDist)*OrificeCenterDist)*(a - 1));
                YStartPoint
            ], [XStartPoint + L_Border*a; YStartPoint + W_Border]))
        if a > 1
            Layout ← stack(Layout, CreateLayout(Num), SetLayout(Num), VPortErase([0; 0]*m, [10; 7.7]*m), VPortNew([.013; .013]*m, [.013 m + L_Border + D_LfomOrifices/2; W_Border + .013 m]), ChangeView([
                XStartPoint - D_LfomOrifices/2 + (floor(L_Paper/OrificeCenterDist)*OrificeCenterDist)*(a - 1);
                YStartPoint
            ], [XStartPoint + L_Border*a; YStartPoint + W_Border]))
        Num ← Num + 1 m
    return Layout
SetUpTLayouts(N_Layout) :=
    Num ← (N_HLayouts + 1)*m + 1 m
    Layout ← CreateLayout(Num)
    for c ∈ N_Layout
        if c == 1
            Layout ← stack(Layout, SetLayout(Num), VPortErase([0; 0]*m, [10; 7.7]*m), VPortNew([.013; .013]*m, [.013 m + L_Border + D_LfomOrifices/2; W_Border + .013 m]), ChangeView([
                XStartPoint - D_LfomOrifices/2 + ((floor(L_Paper/OrificeCenterDist)*OrificeCenterDist)*c);
                YStartPoint + W_Border
            ], [XStartPoint + L_Border*(c + 1); YStartPoint + 2*W_Border]))
        if c > 1
            Layout ← stack(Layout, CreateLayout(Num), SetLayout(Num), VPortErase([0; 0]*m, [10; 7.7]*m), VPortNew([.013; .013]*m, [.013 m + L_Border + D_LfomOrifices/2; W_Border + .013 m]), ChangeView([
                XStartPoint - D_LfomOrifices/2 + ((floor(L_Paper/OrificeCenterDist)*OrificeCenterDist)*c);
                YStartPoint + W_Border
            ], [XStartPoint + L_Border*(c + 1); YStartPoint + 2*W_Border]))
        Num ← Num + 1 m
    return Layout
SetUpVLayouts(N_Layout) :=
    Num ← N_HLayouts*m + 1 m
    Layout ← CreateLayout(Num)
    for b ∈ 1 .. N_Layout
        if b == 1
            Layout ← stack(Layout, SetLayout(Num), VPortErase([0; 0]*m, [10; 7.7]*m), VPortNew([.013; .013]*m, [.013 m + L_Border + D_LfomOrifices/2; W_Border + .013 m]), ChangeView([
                XStartPoint - D_LfomOrifices/2 + ((floor(L_Paper/OrificeCenterDist)*OrificeCenterDist)*(b - 1));
                YStartPoint + W_Border*b
            ], [XStartPoint + L_Border*b; YStartPoint + W_Border*(b + 1)]))
        if b > 1
            Layout ← stack(Layout, CreateLayout(Num), SetLayout(Num), VPortErase([0; 0]*m, [10; 7.7]*m), VPortNew([.013; .013]*m, [.013 m + L_Border + D_LfomOrifices/2; W_Border + .013 m]), ChangeView([
                XStartPoint - D_LfomOrifices/2 + ((floor(L_Paper/OrificeCenterDist)*OrificeCenterDist)*(b - 1));
                YStartPoint + W_Border*b
            ], [XStartPoint + L_Border*b; YStartPoint + W_Border*(b + 1)]))
        Num ← Num + N_TLayouts*m + 1 m
    Layout ← stack(Layout, SetUpTLayouts(N_TLayouts)) if N_TLayouts > 1
    return Layout
DimStyle(H_Component) := concat("-dimstyle ", "st ", "dimtxt ", stringit(H_Component), sp, "dimasz ", stringit(H_Component), sp, "dimgap ", stringit(H_Component), sp, "dimcen ", stringit(0.0000 m), sp)
LfomDiameterDim := concat(DimStyle(.005 m), "_dimdiameter ", point([
    XStartPoint + (OrificeCenterDist*N_LfomOrifices[0]) - D_LfomOrifices/2 - S_LfomOrificesMin + (D_LfomOrifices/2*sqrt(2)/2);
    H_LfomOrifices[0] + (D_LfomOrifices/2*sqrt(2)/2)
]), sp, point([
    XStartPoint + (OrificeCenterDist*N_LfomOrifices[0] - D_LfomOrifices/2 + S_LfomOrificesMin) + (D_LfomOrifices/2*sqrt(2)/2);
    H_LfomOrifices[0] + (D_LfomOrifices/2*sqrt(2)/2)
]))
Boundary := concat("_line ", point([XStartPoint - D_LfomOrifices/2; YStartPoint + H_LfomOrifices[0] - D_LfomOrifices/2]), sp, point([
    XStartPoint - D_LfomOrifices/2;
    YStartPoint + H_LfomOrifices[last(H_LfomOrifices)] + W_Border - D_LfomOrifices/2
]), sp, "_line ", point([XStartPoint - D_LfomOrifices/2; YStartPoint + H_LfomOrifices[0] - D_LfomOrifices/2]), sp, point([
    (XStartPoint + N_HLayouts*L_Border + ((N_HLayouts - 1)*D_LfomOrifices/2));
    YStartPoint + H_LfomOrifices[0] - D_LfomOrifices/2
]), sp)
Zoom := concat("z ", "e")
CreateLabel(Str1, Str2) := concat("Page ", Str1, Str2)
CopyText(Object, BasePt, DisPt) := concat("copy ", point(Object), sp, point(BasePt), sp, sp, "mode ", "single ", sp, point(DisPt))
DelineateL(XStartPoint, YStartPoint) := concat("_line ", point([XStartPoint + L_Border; YStartPoint + (H_LfomOrifices[0] - D_LfomOrifices/2)]), sp, point([
    XStartPoint + L_Border;
    YStartPoint + H_LfomOrifices[last(H_LfomOrifices)] + W_Border - D_LfomOrifices/2
]), sp)
LabelT(XStartPoint) :=
    TempX ← XStartPoint
    Line ← Boundary
    c ← 0
    while XStartPoint < TempX + ((N_TLayouts - 1)*L_Border)
        Label_MiddleS ← [XStartPoint + L_Border - 1 cm; YStartPoint + (3/2*W_Border) - 1 cm]
        Label_MiddleE ← [XStartPoint + L_Border - 1 cm; YStartPoint + (3/2*W_Border) + 2 cm]
        Label_TopS ← [XStartPoint + L_Border - 1 cm; YStartPoint + 2*W_Border - 2 cm]
        Label_TopE ← [XStartPoint + L_Border - .5 cm; YStartPoint + 2*W_Border - .5 cm]
        Label_BottS ← [XStartPoint + L_Border - 5 cm; YStartPoint + W_Border - 1 cm]
        Label_BottE ← [XStartPoint + L_Border - 2 cm; YStartPoint + W_Border - .5 cm]
        Line ← stack(Line, Zoom, LabelLayout(CreateLabel(Labels[:, 0][c + N_HLayouts], Labels[:, 0][c + N_HLayouts + 1]), .005 m, Label_MiddleS, Label_MiddleE, 90 m), "", MirrorLast([XStartPoint + L_Border; YStartPoint], [XStartPoint + L_Border; YStartPoint + 2*W_Border], "n"), LabelLayout(Labels[:, 0][c + N_HLayouts], .005 m, Label_TopS, Label_TopE, 0 m), "", LabelLayout(CreateLabel(Labels[:, 0][c], Labels[:, 0][c + N_HLayouts]), .005 m, Label_BottS, Label_BottE, 0 m), "", MirrorLast([(XStartPoint + L_Border)/2; YStartPoint + W_Border], [XStartPoint + L_Border; YStartPoint + W_Border], "n"), Zoom)
        XStartPoint ← XStartPoint + L_Border + D_LfomOrifices/2
        c ← c + 1
    Label_TopS ← [XStartPoint + L_Border - 1 cm; YStartPoint + 2*W_Border - 2 cm]
    Label_TopE ← [XStartPoint + L_Border - .5 cm; YStartPoint + 2*W_Border - .5 cm]
    Label_BottS ← [XStartPoint + L_Border - 5 cm; YStartPoint + W_Border - 1 cm]
    Label_BottE ← [XStartPoint + L_Border - 2 cm; YStartPoint + W_Border - .5 cm]
    Line ← stack(Line, Zoom, LabelLayout(Labels[:, 0][c + N_HLayouts], .005 m, Label_TopS, Label_TopE, 0 m), "", LabelLayout(CreateLabel(Labels[:, 0][c], Labels[:, 0][c + N_HLayouts]), .005 m, Label_BottS, Label_BottE, 0 m), "", MirrorLast([(XStartPoint + L_Border)/2; YStartPoint + W_Border], [XStartPoint + L_Border; YStartPoint + W_Border], "n"), Zoom) if XStartPoint < TempX + (N_TLayouts*L_Border)
    return Line
DelineateLMultiple(XStartPoint, YStartPoint) :=
    TempX ← XStartPoint
    Line ← Boundary
    b ← 0
    while XStartPoint < TempX + ((N_HLayouts - 1)*L_Border)
        Label_MiddleS ← [XStartPoint + L_Border - 1 cm; (YStartPoint + W_Border)/2 - 1 cm]
        Label_MiddleE ← [XStartPoint + L_Border - 1 cm; (YStartPoint + W_Border)/2 + 2 cm]
        Label_TopS ← [XStartPoint + L_Border - 1 cm; YStartPoint + W_Border - 2 cm]
        Label_TopE ← [XStartPoint + L_Border - .5 cm; YStartPoint + W_Border - .5 cm]
        Line ← stack(Line, DelineateL(XStartPoint, YStartPoint), Zoom, LabelLayout(CreateLabel(Labels[:, 0][b], Labels[:, 0][b + 1]), .005 m, Label_MiddleS, Label_MiddleE, 90 m), "", MirrorLast([XStartPoint + L_Border; YStartPoint], [
            XStartPoint + L_Border;
            YStartPoint + H_LfomOrifices[last(H_LfomOrifices)] + W_Border - D_LfomOrifices/2
        ], "n"), LabelLayout(Labels[:, 0][b], .005 m, Label_TopS, Label_TopE, 0 m), "", Zoom)
        XStartPoint ← (XStartPoint + L_Border + D_LfomOrifices/2)
        b ← b + 1
    Label_TopS ← [XStartPoint + L_Border - 1 cm; YStartPoint + W_Border - 2 cm]
    Label_TopE ← [XStartPoint + L_Border - .5 cm; YStartPoint + W_Border - .5 cm]
    Line ← stack(Line, DelineateL(XStartPoint, YStartPoint), Zoom, LabelLayout(Labels[:, 0][b], .005 m, Label_TopS, Label_TopE, 0 m), "", Zoom) if XStartPoint < TempX + (N_HLayouts*L_Border)
    return Line
DelineateW(XStartPoint, YStartPoint) := concat("_line ", point([XStartPoint - D_LfomOrifices/2; YStartPoint + W_Border]), sp, point([XStartPoint + N_HLayouts*L_Border + (N_HLayouts - 1)*D_LfomOrifices/2; YStartPoint + W_Border]), sp)
DelineateWMultiple(XStartPoint, YStartPoint) :=
    TempY ← YStartPoint
    Line ← Boundary
    a ← 0
    while YStartPoint ≤ TempY + N_VLayouts*W_Border
        Line ← stack(Line, DelineateW(XStartPoint, YStartPoint))
        YStartPoint ← YStartPoint + W_Border
        a ← a + 1
    return Line
LfomOrificesTemplate :=
    Local ← view("t")
    for h ∈ 0 .. last(H_LfomOrifices)
        origin ← [XStartPoint + D_LfomOrifices/2*(mod(h, 2) == 0); YStartPoint + H_LfomOrifices[h]]
        Crosshair ← concat("z ", "e ", "_line ", point(origin[:, 0] - [D_LfomOrifices/4; 0 m]), sp, point(origin[:, 0] + [D_LfomOrifices/4; 0 m]), sp, sp, "_line ", point(origin[:, 0] - [0 m; D_LfomOrifices/4]), sp, point(origin[:, 0] + [0 m; D_LfomOrifices/4]), sp)
        PointArray ← [
            [origin[0] - D_LfomOrifices/3; origin[1]];
            [origin[0]; origin[1] - D_LfomOrifices/3];
            [origin[0] + (D_LfomOrifices/2*sqrt(2)/2); origin[1]];
            [origin[0]; origin[1] + (D_LfomOrifices/2*sqrt(2)/2)]
        ]
        Local ← stack(Local, circle(origin, D_LfomOrifices/20), circle(origin, D_LfomOrifices/2), Crosshair) if N_LfomOrifices[h] ≠ 0
        Local ← stack(Local, ArrayMultiple(PointArray, 1, N_LfomOrifices[h], 0, OrificeCenterDist)) if N_LfomOrifices[h] > 1
    Local ← stack(Local, LfomDiameterDim, DelineateLMultiple(XStartPoint, YStartPoint), DelineateWMultiple(XStartPoint, YStartPoint), LabelT(XStartPoint), SetUpHLayouts(N_HLayouts), SetUpVLayouts(N_VLayouts))
    return Local
AC_LfomOrificesTemplate := LfomOrificesTemplate
# Display Variables
HL_Lfom = 0.2 m
Q_Plant = 0.01 m^3/s
ND_RMPipe = 0.1524 m
D_LfomOrifices = 0.01905 m
B_LfomRows = 0.02 m
H_LfomOrifices = [0.009525; 0.029525; 0.049525; 0.069525; 0.089525; 0.109525; 0.129525; 0.149525; 0.169525; 0.189525] m
N_LfomOrifices = [13; 3; 3; 4; 2; 3; 2; 2; 2; 2]
AC_Lfom = [
    "-layer m EtLfomPlu"; "c t 0,255,255"; "EtLfomPlu"; "  "; "_cylinder 0,0,0 0.08414 a -0.38953,0,0"; "_cylinder 0.01,0,0 0.07977 a -0.39953,0,0"; "_zoom w -0.39953,-0.09414,0 -0.37953,0.09414,0"; "_subtract -0.38953,0.08414,0  -0.39953,0.07977,0 "; "rotate3d l  y 0,0,0 90"; "-group c EtLfomPlu y "
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]
AC_LfomOrificesTemplate = [
    "_-view o t"; "c 0.00953,0.00953 0.00095"; "c 0.00953,0.00953 0.00953"; "z e _line 0.00476,0.00953 0.01429,0.00953  _line 0.00953,0.00476 0.00953,0.01429 "; "-array"; "0.00318,0.00953"; "0.00953,0.00318"; "0.01626,0.00953"; "0.00953,0.01626"; " R 1 13 0.02905"
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]
# Previews
# [reference: LayoutsAC.xmcd]
AI_Lfom = ["laythw"; "_-view o f"; "-plot y "; "PublishToWeb PNG.pc3"; "VGA (640.00 x 480.00 Pixels)"; "l n e F"; ""; " ."; "y  [FILEPATH]LFOM_f"; "n y"; "shademode x -view swiso"]
AI_LfomTemplate = ["laythw"; "_-view o t"; "-plot y "; "PublishToWeb PNG.pc3"; "VGA (480.00 x 640.00 Pixels)"; "l n e F"; ""; " ."; "y  [FILEPATH]LFOMTemplate_t"; "n y"; "shademode x -view swiso"]
