# SRSF Modular Code
# NOTE: this code does not draw the plant drain channel, as the original drawing code for the srsf does!
# User Inputs
Q_Plant := □  # error: This placeholder is empty.  # To be left undefined and inputed online by the user
method := "SRSF"
# From Expert Inputs
Country := 0
Language := 0
# Tabulated Constants
Rho_H2O := 1000*kg/m^3
E_Concrete := 2 mm
Nu_Water := 1*10^-6*m^2/s  # The kinematic viscosity of water.
E_Pvc := 0.12 mm
Pi_Jet := 0.4
P_Atm := 1 atm
Rho_Air := 1.204*kg/m^3
Nu_Air := 12*mm^2/s
# General Assumptions and  Constants
W_ChannelMin := 15 cm
H_PlantFreeboard := 0.1*m
HL_ChannelMax := 5 cm
W_HumanMin := 0.54 m
T_ConcreteMin := 5 cm
S_Fitting := 5 cm
T_PlantWall := 15 cm
T_ChannelWall := T_PlantWall
EN_DrillSeries := 0
EN_Water := 0
EN_FilterWater := 2
# Linear Flow Orifice Meter
D_DrillEng :=
    i ← 0
    D_DrillEng[0] ← 1/32*in
    while D_DrillEng[i] ≤ 3/16*in - 1/128*in
        i ← i + 1
        D_DrillEng[i] ← D_DrillEng[i - 1] + 1/128*in
    while D_DrillEng[i] < 1 in - 1/16*in
        i ← i + 1
        D_DrillEng[i] ← D_DrillEng[i - 1] + 1/16*in
    while D_DrillEng[i] < 2 in
        i ← i + 1
        D_DrillEng[i] ← D_DrillEng[i - 1] + 1/4*in
    return D_DrillEng
D_DrillMet :=
    i ← 0
    D_DrillMet[0] ← 0.5 mm
    while D_DrillMet[i] ≤ 5 mm - 0.1 mm
        i ← i + 1
        D_DrillMet[i] ← D_DrillMet[i - 1] + 0.1 mm
    while D_DrillMet[i] < 20 mm
        i ← i + 1
        D_DrillMet[i] ← D_DrillMet[i - 1] + 1 mm
    while D_DrillMet[i] < 50 mm
        i ← i + 1
        D_DrillMet[i] ← D_DrillMet[i - 1] + 2 mm
    return D_DrillMet
D_Drill :=
    D_Drill ← D_DrillEng if EN_DrillSeries == 0
    D_Drill ← D_DrillMet otherwise
# Flocculator
ED_Floc := 10.5*mW/kg
# Sedimentation Tank
Pi_QSludgeOrifices := 0.85
B_SedSludgeOrificesEst := 10 cm
HW_SedEst := 2 m
Ti_SludgeDrain := 30 min
L_SedPlateCantilevered := 20 cm
S_SedPlateMin := 2.5 cm
L_SedPlateSheet := 300 cm
AN_SedPlate := 60 deg
AN_SedSlope := 50 deg
Perpendicular_Weir := 0
Parallel_Weir := 1
HL_SedWeirMax := 5 cm
B_SedLaunderOrificesEst := 10 cm
Pi_QLaunderOrifices := 0.80
HL_SedLaunderBod := 4 cm
T_SedPlate := 0.2 cm
T_SedWeir := 4 cm
W_SedPlate := 42 in
W_SedBay := W_SedPlate
ED_SedInlet := ED_Floc
V_SedCBod := 0.12*mm/s
V_SedUpBod := 1*mm/s
H_SedSlopesToFlocWeirMin := 15 cm
H_FlocWeirToLamellaMin := 10 cm
L_SedLaunderCapExcess := 3 cm
# SRSF Inputs
# Construction and Design Inputs
T_FiWall := 25 cm
ND_FiKeyPipe := 1.5 in
# Schedule 40 or Schedule 80 for slotted branches????? Schedule 40 has larger ID and that increases the max flow rate it can handle and thus increases the allowable width of the filter. Schedule 40 for strength and servicability. This changes the dimensions of the filter box and the constraints for the entrance and exit boxes.
PS_FiBranch := 2
# Design guidelines say 11 mm/s. The success of lab-scale backwashing at 10 mm/s suggests that this is a reasonable and conservative value
V_FiBw := 11*mm/s
N_FiLayer := 6
V_FiLayer := V_FiBw/N_FiLayer = 1.83333 mm/s
H_FiLayerMin := 20 cm  # Depth of each filter layer
B_FiManifoldBranch := 10 cm
ND_FiManBranch := 1 in
# We are going to take this pipe size for the slotted pipes as a given. Larger pipes may block too much flow and they are harder to install.
ND_FiBwManBranch := 1.5 in
W_FiManSlots := 0.008 in = 0.2032 mm  # A slot thickness of 0.008 in or 0.2 mm is selected so that sand will not enter the slotted pipes.
B_SlotsAvailable := [1/8*in; 3/16*in; 1/4*in] = [3.175; 4.7625; 6.35] mm  # These are the possible spacings for the slots that our supplier can fabricate
ND_FiBranchHolder := 2 in
ND_FiBwBranchHolder := 2 in
S_FiTrunkMin := 3 cm  # Minimum vertical spacing between trunk line pipes going through the filter wall for concrete construction
S_FiManAssembly := 1 cm
# Space between the ends of the branch receiver pipes and the walls so that the manifold assemblies are easy to lower into the filter boxes (if the branch receivers extended the entire length of the box they would just barely fit and it would be hard to get into place.
L_FiManFerncoCoupling := 4 cm
L_FiManBranchExt := 2 cm  # How far the branch extends into the trunk line
Ti_FiBwInitiationBod := 3 min  # AKA time to drain the filter box of the water above the fluidized bed
HL_FiBwSF := 20 cm  # This is the extra head we are going to provide to ensure that we can initiate backwash.
HL_FiSiphonMax := 20 cm  # Maximum acceptable head loss through the siphon at SS; used to calculate a diameter
ND_FiSandOutlet := 2 in
H_FiDistBarrier := 10 cm
L_FiSiphonChannelStubMin := 20 cm
# Being able to shorten the stub from which the siphon discharges into the main plant drain channel allows for some flexibility in the hydraulic design.
HL_FiEntrancePipeMax := 10 cm
ND_FiTrunkMax := 6 in
W_FiInletChannelMin := 30 cm
# Elevation Safety Margins
H_FiBwNoSuckAir := 20 cm  # Minimum depth in the entrance box during backwash such that there is standing water over the inlet.
H_FiSiphonNoSuckAir := 10 cm  # Minimum depth over the orifices in the siphon manifold so that there is standing water and air is not entrained.
H_FiFluidizedBedToSiphon := 20 cm
H_FiForwardNoSuckAir := 10 cm
H_FiWeirFreefall := 3 cm
H_FiAirRemovalBlockSubmerged := 5 cm
H_FiBypassSafety := 10 cm
H_DrainOutletSafety := 10 cm
H_FiOverflowWeirFreefall := 10 cm
# Sand Properties
D_FiSandES := 0.5 mm
Pi_UCFiSand := 1.65
D_FiSand60 := D_FiSandES*Pi_UCFiSand = 0.825 mm
ε_FiSand := 0.4  # Porosity in a sand bed
Rho_FiSand := 2650*kg/m^3
Pi_FiFluidized := 1.3  # Bed expands 30% when fluidized
k_Kozeny := 5  # Carman-Kozeny coefficient
# Operator Access
W_MpWalkwayMin := 1*m
W_DCWalkway := 1 m
# Minor Loss Coefficients
K_PipeEnt := 0.5
K_PipeExit := 1
K_El90 := 0.9
# Design References
# [reference: MathFunctions.xmcd]
# [reference: PipeDatabase.xmcd]
# [reference: FluidsFunctions.xmcd]
# [reference: StackedRapidSandFilter.xmcd]
# [reference: MtoATranslators.xmcd]
# needed: mathFunctions, PipeDatabase, FluidsFunctions, StackedRapidSandFilter, MtoAtranslators,
# MtoATranslatorsWrapped, PlumbingF, TankF, DrainchannelF
# [reference: MtoATranslatorsWrapped.xmcd]
# [reference: PlumbingF.xmcd]
# [reference: TankF.xmcd]
# [reference: DrainChannelF.xmcd]
# Sed Tank Inlet Channel Stuff
# Inlet Channel:
N_SedTanksMin := 3
ND_SedManifoldMin := 6 in
ND_SedManifoldMax := 10 in
Q_SedManifoldMax := Q_PipeED(ED_SedInlet, innerdiameter(ND_SedManifoldMax, PS_Default), Pi_VenaContractaOrifice, Pi_Jet) = 9.76441 L/s
Q_SedManifoldMin := Q_PipeED(ED_SedInlet, innerdiameter(ND_SedManifoldMin, PS_Default), Pi_VenaContractaOrifice, Pi_Jet)
fN_SedTanks(Q_Plant) := max(min(ceil(Q_Plant/Q_PipeED(ED_SedInlet, innerdiameter(ND_SedManifoldMin, PS_Default), Pi_VenaContractaOrifice, Pi_Jet)), N_SedTanksMin), ceil(Q_Plant/(2*Q_SedManifoldMax)))
N_SedTanks := fN_SedTanks(Q_Plant) = 3
fN_SedBays(Q_Plant) := min(ceil(Q_Plant/(N_SedTanksMin*Q_SedManifoldMax)), 2)
N_SedBaysEst := fN_SedBays(Q_Plant) = 1
Q_Sed := Q_Plant/N_SedTanks = 0.00666667 m^3/s
L_SedUpflowMax := Q_PipeED(ED_SedInlet, innerD(ND_SedManifoldMax, PS_Default), Pi_VenaContractaOrifice, Pi_Jet)/(V_SedUpBod*W_SedBay) = 9.15299 m
N_SedBaysTotal := ceil(Q_Plant/(V_SedUpBod*W_SedBay*L_SedUpflowMax)) = 3
N_SedBaysMin := ceil(N_SedBaysTotal/N_SedTanks) = 1
N_SedBays := max(N_SedBaysMin, N_SedBaysEst) = 1
W_Sed := N_SedBays*W_SedBay
L_SedChannel := N_SedTanks*W_Sed + (N_SedTanks - 1)*T_PlantWall
HL_SedWeirExit := Headloss_weir(Q_Plant, L_SedChannel) = 2.13579 cm
A_SedInletChannelED := A_Channel(Q_Plant, ED_SedInlet, Pi_VenaContractaOrifice, Pi_Jet)
Q_SedBay := Q_Sed/N_SedBays
ND_SedManifold := NominalDiameter(D_PipeED(ED_SedInlet, Q_SedBay, Pi_VenaContractaOrifice, Pi_Jet), PS_Default)
ND_FiEntrancePipeMax := FloorNearest(Pipesizes[index(FloorNearest(W_SedBay/2 - ConRadius(ND_SedManifold) - 2*S_Fitting, Pipesizes[:, 1]), Pipesizes[:, 1]), 0], AvailND) = 8 in
W_SedInletChannelPlumbing := 2*ConRadius(ND_SedManifold) + 2*S_Fitting = 0.400038 m
Q_SedManifold := Q_SedBay
L_SedUpflowEst := Q_SedBay/(W_SedBay*V_SedUpBod)
ND_SedLaunder := ND_Manifold(Q_SedBay, HL_SedLaunderBod, L_SedUpflowEst, Pi_QLaunderOrifices, PS_Default, Nu_Water, E_Pvc, K_PipeExit, 2*floor(L_SedUpflowEst/B_SedLaunderOrificesEst))
HW_SedInletChannelPlumbing := HL_SedLaunderBod + 2*ConRadius(ND_SedLaunder) + S_Fitting + HL_SedWeirExit = 0.295508 m
[W_SedInletChannelPreWeir; HW_SedInletChannel] :=
    W ← W_SedInletChannelPlumbing
    HW ← HW_SedInletChannelPlumbing
    while W*HW < A_SedInletChannelED
        HW ← HW + 1 mm if HW < W
        W ← W + 1 mm otherwise
    return [W; HW]
HW_SedExitChannel := HW_SedInletChannel - HL_SedLaunderBod = 0.255508 m
H_SedWeirExit := HW_SedExitChannel - HL_SedWeirExit = 0.23415 m
H_LamellaToLaunder := T_ConcreteMin + CapThickness(ND_SedLaunder)
S_SedPlate := S_SedPlateMin
B_SedPlate := S_SedPlate + T_SedPlate
N_SedModulePlatesMax := floor(L_SedPlateCantilevered/B_SedPlate*tan(AN_SedPlate) + 1) = 13
N_SedModulePlatesMin := 8
PlateIndex :=
    for j ∈ N_SedModulePlatesMin .. N_SedModulePlatesMax
        for i ∈ 0 .. 50
            matrix[i, j - N_SedModulePlatesMin] ← j*(i + 1)
    array ← matrix[:, 0]
    for j ∈ N_SedModulePlatesMin + 1 .. N_SedModulePlatesMax
        array ← stack(array, matrix[:, j - N_SedModulePlatesMin])
    array ← sort(array)
    i ← 0
    while i < (last(array) - 1)
        array ← stack(submatrix(array, 0, i, 0, 0), submatrix(array, i + 2, last(array), 0, 0)) if array[i] == array[i + 1]
        array ← submatrix(array, 0, i + 1, 0, 0) if (i + 1 == i + 2 and i + 2 == last(array))
        i ← i + 1
    return array
L_SedUpflow :=
    i ← 0
    L ← 0 m
    while L < L_SedUpflowEst
        i ← i + 1
        L ← (H_SedWeirExit + T_ChannelWall - outerdiameter(ND_SedLaunder) - H_LamellaToLaunder - T_SedPlate*cos(AN_SedPlate))/tan(AN_SedPlate) + T_SedPlate/sin(AN_SedPlate) + (PlateIndex[i] - 1)*B_SedPlate/sin(AN_SedPlate) - 2*T_ConcreteMin
    return L
Q_SedSludgeDrain := 2*W_SedBay*L_SedUpflow*HW_SedEst/Ti_SludgeDrain
N_SedSludgeOrificesEst := floor(L_SedUpflow/B_SedSludgeOrificesEst) - 1 = 62
Q_SedSludgeOrificesEst := Q_SedSludgeDrain/N_SedSludgeOrificesEst
D_SedSludgeChannel := D_Manifold(Q_SedSludgeDrain, HW_SedEst/3, L_SedUpflow, Pi_QSludgeOrifices, Nu_Water, E_Concrete, 0, N_SedSludgeOrificesEst) = 0.11674 m
A_SedSludge := π/4*D_SedSludgeChannel^2
W_SedSludge := sqrt(A_SedSludge)
H_SedSludge := A_SedSludge/W_SedSludge
ND_SedJetReverser := 1 in
ND_SedDiffuser := 1 in
OD_Diffuser := outerdiameter(ND_SedDiffuser) = 3.3401 cm
Circ_SedDiffuser := π*innerdiameter(ND_SedDiffuser, PS_Default) = 9.37608 cm
T_SedDiffuserWall := outerradius(ND_SedDiffuser) - innerdiameter(ND_SedDiffuser, PS_Default)/2 = 0.001778 m
L_SedDiffuserOutlet := 5 cm - 2*T_SedDiffuserWall
B_SedManifoldPort := L_SedDiffuserOutlet + 2*T_SedDiffuserWall = 5 cm
N_SedManifoldPorts := floor((L_SedUpflow - SocketDepth(ND_SedManifold) - CapThickness(ND_SedManifold))/(L_SedDiffuserOutlet + 2*T_SedDiffuserWall)) = 124
Q_SedManifoldPort := Q_SedBay/N_SedManifoldPorts = 0.0537634 L/s
D_SedManifoldPort := CeilNearest(D_PipeED(ED_SedInlet, Q_SedManifoldPort, Pi_VenaContractaOrifice, Pi_Jet), D_Drill) = 3.175 cm
V_SedManifoldPort := Q_SedManifoldPort/(π*D_SedManifoldPort^2/4)*1/Pi_VenaContractaOrifice = 0.109526 m/s
W_SedDiffuserOutlet := 1 cm
V_SedDiffuser := Q_SedManifoldPort/(B_SedManifoldPort*W_SedDiffuserOutlet) = 0.107527 m/s
V_SedManifoldPort/V_SedDiffuser =  # error: This variable is undefined.
L_SedDiffuserRoundjetanalogy := 6.2*V_SedManifoldPort/V_SedDiffuser*D_SedManifoldPort*sqrt(Pi_VenaContractaOrifice) = 0.157882 m
L_SedDiffuserPlanejetanalogy := (2.41*V_SedManifoldPort/V_SedDiffuser)^2*D_SedManifoldPort*sqrt(Pi_VenaContractaOrifice) = 0.150652 m
L_SedManifoldDiffuser := max(L_SedDiffuserPlanejetanalogy, L_SedDiffuserRoundjetanalogy)
Z_SedManifoldPipe := H_SedSludge + T_ConcreteMin + outerradius(ND_SedJetReverser) + L_SedManifoldDiffuser + innerdiameter(ND_SedManifold, PS_Default)/2 = 0.45344 m
W_SedSideSlopes := (W_SedBay - outerradius(ND_SedJetReverser))/2
H_SedSideSlopes := tan(AN_SedSlope)*W_SedSideSlopes = 0.62573 m
H_SedInletChannel := HW_SedInletChannel + H_PlantFreeboard
EN_InletChannelGeom :=
    hl_weir ← Headloss_weir(Q_Plant, W_SedInletChannelPreWeir)
    Geom_Channel ← Perpendicular_Weir if (hl_weir ≤ HL_SedWeirMax)
    Geom_Channel ← Parallel_Weir otherwise
    return Geom_Channel
W_SedWeirInlet :=
    W_SedInletChannelPreWeir if EN_InletChannelGeom == Perpendicular_Weir
    L_SedChannel otherwise
HL_SedWeirInlet := Headloss_weir(Q_Plant, W_SedWeirInlet) = 0.0213579 m
H_SedWeirInlet := HW_SedInletChannel - HL_SedWeirInlet = 0.27415 m
W_SedInletChannelPostWeir := max(W_ChannelMin, W_HorizChannel(Q_Plant, H_SedWeirInlet, HL_ChannelMax, L_SedChannel, Nu_Water, E_Concrete, 1))
W_SedInletChannel :=
    W_SedInletChannelPreWeir if EN_InletChannelGeom == Perpendicular_Weir
    W_SedInletChannelPreWeir + T_SedWeir + W_SedInletChannelPostWeir if EN_InletChannelGeom == Parallel_Weir
L_FiEntrancePipeEst := W_DCWalkway + W_SedInletChannel + 1 m = 2.59004 m
K_FiEntrancePipe := K_El90 + K_PipeEnt + K_PipeExit = 2.4
ND_FiEntrancePipe := min(D_pipeschedule(min(Q_Plant, Q_pipetotal(innerdiameter(AvailND[last(AvailND)], PS_Default), HL_FiEntrancePipeMax, L_FiEntrancePipeEst, Nu_Water, E_Pvc, K_FiEntrancePipe)), PS_Default, HL_FiEntrancePipeMax, L_FiEntrancePipeEst, Nu_Water, E_Pvc, K_FiEntrancePipe), ND_FiEntrancePipeMax) = 8 in
N_FiEntrancePipes := ceil(Q_Plant/Q_pipetotal(innerdiameter(ND_FiEntrancePipe, PS_Default), HL_FiEntrancePipeMax, L_FiEntrancePipeEst, Nu_Water, E_Pvc, K_FiEntrancePipe)) = 1
Q_FiEntrancePipe := Q_Plant/N_FiEntrancePipes = 20 L/s
HL_FiEntrancePipe := h_l(Q_FiEntrancePipe, innerdiameter(ND_FiEntrancePipe, PS_Default), L_FiEntrancePipeEst, K_FiEntrancePipe, Nu_Water, E_Pvc) = 5.36936 cm
# SRSF Origin Points
Q_FilterMax :=
    for i ∈ 0 .. last(AvailND)
        H_FiLayer ← H_FiLayerF(AvailND[i])
        HL_FiCleanLayer ← h_lKozeny(H_FiLayer, D_FiSand60, V_FiLayer, ε_FiSand, Nu_Water)
        V_FiTrunkMaxPR ← sqrt(2*g*HL_FiCleanLayer*Pi_FiManifoldHeadLoss)
        Q_FilterMax[i] ← π*innerdiameter(AvailND[i], PS_Default)^2/4*V_FiTrunkMaxPR*N_FiLayer/2
    return Q_FilterMax
Plant_Origin[0] := Fi_Origin[0] + W_FiInletChannel + 5*T_PlantWall + T_FiWall + L_FiEntrance + L_FiExit + W_MpWalkway + L_Sed + W_PlantDC
# REMEMBER from srsf drawing code:
# Origin Points:
Fi_origin := [
    Plant_Origin[0] - W_FiInletChannel - 5*T_PlantWall - T_FiWall - L_FiEntrance - L_FiExit - W_MpWalkway - L_Sed - W_PlantDC;
    Plant_Origin[1] + N_SedTanks*(W_Sed + T_PlantWall) - T_PlantWall - W_Fi/2 - ConRadius(ND_FiBwTrunk) - S_Fitting;
    Z_FiBottom
]
Fi_Origin := [0 m; 0 m; 0 m]
Z_FiBottom := Z_FiEntranceBottom + H_FiBwNoSuckAir - HL_FiBwTotalSS - H_FiSiphonNoSuckAir - H_FiFluidizedBed - H_FiFluidizedBedToSiphon
FiEntranceBox_Origin := [
    Fi_Origin[0] + 2*T_PlantWall + T_FiWall + L_FiEntrance + L_FiExit + W_MpWalkway;
    Fi_Origin[1] + W_Fi/2 - W_FiEntrance + S_Fitting + ConRadius(ND_FiBwTrunk);
    Fi_Origin[2] - H_FiBwNoSuckAir + HL_FiBwTotalSS + H_FiSiphonNoSuckAir + H_FiFluidizedBed + H_FiFluidizedBedToSiphon
]
FiExitBox_Origin := FiEntranceBox_Origin + [-L_FiEntrance - T_PlantWall; 0; 0]
Z_SedSideSlopes := Fi_Origin[2] + H_SedSludge + T_ConcreteMin + outerradius(ND_SedJetReverser) + H_SedSideSlopes
# the Fi.origin here should really be a Plant.Origin I'm just seeing what will work
Z_SedFlocWeir := max(Z_SedManifoldPipe + outerradius(ND_SedManifold) + T_ConcreteMin, Z_SedSideSlopes + H_SedSlopesToFlocWeirMin) = 0.945889 m
Z_SedLamellaBottomMin := Z_SedFlocWeir + H_FlocWeirToLamellaMin
L_SedChannelToWall := L_SedUpflow + 2*T_ConcreteMin
N_SedPlates := round((L_SedChannelToWall - (H_SedWeirExit + T_ChannelWall - outerdiameter(ND_SedLaunder) - H_LamellaToLaunder - T_SedPlate*cos(AN_SedPlate))/tan(AN_SedPlate) - T_SedPlate/sin(AN_SedPlate))/(B_SedPlate/sin(AN_SedPlate)) + 1) = 204
L_SedPlateActive := (N_SedPlates - 1)*S_SedPlate/sin(AN_SedPlate) = 5.86011 m
L_SedPlateEst := (B_SedPlate*Q_SedBay/(W_SedBay*L_SedPlateActive*V_SedCBod) - S_SedPlate)/(sin(AN_SedPlate)*cos(AN_SedPlate)) = 0.496383 m
N_PlatesPerSheet := floor(L_SedPlateSheet/L_SedPlateEst) = 6
L_SedPlate := L_SedPlateSheet/N_PlatesPerSheet = 0.5 m
Z_SedLaunderMin := Z_SedLamellaBottomMin + (L_SedPlate + T_SedPlate)*sin(AN_SedPlate) + T_ConcreteMin + ConRadius(ND_SedLaunder)
Z_SedChannelBottomMin := Z_SedLaunderMin + ConRadius(ND_SedLaunder) - H_SedWeirExit
H_SedHopperAngleFit := Z_SedChannelBottomMin - Z_SedManifoldPipe + ConRadius(ND_SedManifold)
ND_SedExitChannelDrain := NominalDiameter(D_PipeTotal(Q_Plant, HW_SedEst, HW_SedEst, Nu_Water, E_Pvc, K_PipeEnt + K_PipeExit + K_El90), PS_Default) = 4 in
H_SedExitChannel := H_SedInletChannel
W_SedExitChannelPreWeir := max(W_HorizChannel(Q_Plant, HW_SedExitChannel, HL_ChannelMax, L_SedChannel, Nu_Water, E_Concrete, 1), W_ChannelMin, CapHeight(ND_SedLaunder) + 1.05*L_SedLaunderCapExcess)
W_SedExitChannelPostWeir := max(2*ConRadius(ND_FiEntrancePipe)*(N_FiEntrancePipes > 1), W_ChannelMin, W_HorizChannel(Q_Plant, H_SedWeirInlet, HL_ChannelMax, L_SedChannel - W_SedBay/2, Nu_Water, E_Concrete, 1)) = 0.15 m
W_SedExitChannel := W_SedExitChannelPreWeir + T_SedWeir + W_SedExitChannelPostWeir
H_SedHopperHeightNoCoupling := W_SedInletChannel + W_SedExitChannel + T_ChannelWall + 3*T_SedWeir - W_SedInletChannelPreWeir + S_Fitting + 2*ConRadius(ND_SedManifold)
H_SedChanBottomTo45Est := H_SedHopperAngleFit - H_SedHopperHeightNoCoupling
EN_SedChannelCoupling :=
    1 if H_SedChanBottomTo45Est > 0
    0 otherwise
Z_SedChannelBottom :=
    Z_SedChannelBottomMin if EN_SedChannelCoupling == 0 or H_SedChanBottomTo45Est ≥ CouplingLength(ND_SedManifold)
    (Z_SedChannelBottomMin + CouplingLength(ND_SedManifold) - H_SedChanBottomTo45Est) otherwise
Z_FiInletChannelBottomMax := Z_SedChannelBottom - max(CouplingLength(ND_FiEntrancePipe), T_PlantWall) - ElbowRadius(ND_FiEntrancePipe) - ConRadius(ND_FiEntrancePipe) - S_Fitting - SocketDepth(ND_FiEntrancePipe) = 0.91854 m
Z_FiEntranceBottom := Fi_Origin[2] - H_FiBwNoSuckAir + HL_FiBwTotalSS + H_FiSiphonNoSuckAir + H_FiFluidizedBed + H_FiFluidizedBedToSiphon = 3.47057 m
Z_FiEntranceBottomMax := Z_FiEntranceBottom  # Not sure if this is entirely accurate, but seems to work for all flow rates!
Z_FiInletChannelBottom := min(Z_FiInletChannelBottomMax, Z_FiEntranceBottomMax)
Z_SedWeirExit := HL_ChannelMax + HL_FiEntrancePipe + HL_FiEntranceWeir + H_FiWeirFreefall + HL_FiDirty + H_FiForwardNoSuckAir + HL_FiBwSF + H_FiBwNoSuckAir + Z_FiEntranceBottomMax
ZW_FiInletChannel := Z_SedWeirExit - HL_ChannelMax - HL_FiEntrancePipe = 4.4455 m
Z_FiEntranceWeir := ZW_FiInletChannel - HL_FiEntranceWeir = 4.40057 m
ZW_FiEntranceMax := Z_FiEntranceWeir - H_FiWeirFreefall = 4.37057 m
ZW_FiEntranceTerminal := ZW_FiEntranceMax - HL_FiOverflowWeir = 4.30387 m
Z_FiOverflowWeir := ZW_FiEntranceTerminal
ZW_FiEntranceCleanForward := ZW_FiEntranceTerminal - HL_FiDirty = 3.90387 m
Z_FiEntranceStub := ZW_FiEntranceTerminal - HL_FiDirty - H_FiForwardNoSuckAir = 3.80387 m
H_FiEntrance := ZW_FiInletChannel + H_PlantFreeboard - Z_FiEntranceBottomMax = 1.07492 m
FiEntranceBox_dim := [L_FiEntrance; W_FiEntrance; H_FiEntrance]
FiExitBox_dim := [L_FiExit; W_FiEntrance; H_FiEntrance]
Z_FiTop := Z_FiEntranceBottom + H_FiEntrance = 4.5455 m
H_FiInletChannel := Z_FiTop - Z_FiInletChannelBottom = 3.62695 m
HW_FiInletChannel := ZW_FiInletChannel - Z_FiInletChannelBottom = 3.52695 m
W_FiInletChannelFlowDist := W_HorizChannel(Q_Plant, HW_FiInletChannel, HL_FiInletChannel, L_FiInletChannel, Nu_Water, E_Concrete, 0) = 0.0533031 m
W_FiInletChannel := max(W_FiInletChannelFlowDist, W_FiInletChannelMin) = 0.3 m
FiInletChannel_Origin := [
    Fi_Origin[0] + W_FiInletChannel + 3*T_PlantWall + T_FiWall + L_FiEntrance + L_FiExit + W_MpWalkway;
    FiEntranceBox_Origin[1] - L_FiInletChannel + W_FiEntrance;
    Fi_Origin[2] - H_FiBwNoSuckAir + HL_FiBwTotalSS + H_FiSiphonNoSuckAir + H_FiFluidizedBed + H_FiFluidizedBedToSiphon
]
# Coupling Origin Points:
FiInletCoupling1_Origin := [
    FiEntranceBox_Origin[0] - L_FiEntrance + T_ConcreteMin + ConRadius(ND_FiTrunk);
    FiEntranceBox_Origin[1] + W_FiEntrance - ConRadius(ND_FiBwTrunk) - S_Fitting;
    FiEntranceBox_Origin[2] - CouplingLength(ND_FiTrunk) + SocketDepth(ND_FiTrunk)
]
FiInletChannel_Origin[0] - Fi_Origin[0] =  # error
FiBwInletCoupling_Origin := [
    FiInletCoupling1_Origin[0] + L_FiOverflowWeir - S_Fitting - 2*ConRadius(ND_FiBwTrunk);
    FiInletCoupling1_Origin[1];
    FiEntranceBox_Origin[2] - CouplingLength(ND_FiBwTrunk) + SocketDepth(ND_FiBwTrunk)
]
FiInletCoupling2_Origin := [
    FiEntranceBox_Origin[0] - L_FiEntrance + L_FiOverflowWeir - (ConRadius(ND_FiTrunk) + S_Fitting);
    FiEntranceBox_Origin[1] + 2*T_ConcreteMin + 3*ConRadius(ND_FiTrunk);
    FiInletCoupling1_Origin[2]
]
FiInletCoupling3_Origin := [
    FiEntranceBox_Origin[0] - L_FiEntrance + T_ConcreteMin + ConRadius(ND_FiTrunk);
    FiEntranceBox_Origin[1] + 2*T_ConcreteMin + 3*ConRadius(ND_FiTrunk);
    FiEntranceBox_Origin[2] - CouplingLength(ND_FiTrunk) + SocketDepth(ND_FiTrunk)
]
FiExitCoupling0_Origin := [
    FiExitBox_Origin[0] - T_ConcreteMin - ConRadius(ND_FiTrunk);
    FiInletCoupling1_Origin[1];
    FiExitBox_Origin[2] - CouplingLength(ND_FiTrunk) + SocketDepth(ND_FiTrunk)
]
FiExitCoupling1_Origin := [
    (FiExitBox_Origin[0] - L_FiExit + T_ConcreteMin) + ConRadius(ND_FiTrunk);
    FiInletCoupling1_Origin[1];
    FiExitBox_Origin[2] - CouplingLength(ND_FiTrunk) + SocketDepth(ND_FiTrunk)
]
FiExitCoupling2_Origin := [
    (FiExitBox_Origin[0] - L_FiExit + T_ConcreteMin) + ConRadius(ND_FiExitWaste);
    FiExitBox_Origin[1] + T_ConcreteMin + ConRadius(ND_FiTrunk);
    FiExitBox_Origin[2] - CouplingLength(ND_FiTrunk) + SocketDepth(ND_FiTrunk)
]
FiExitCoupling3_Origin := [
    FiExitBox_Origin[0] - T_ConcreteMin - ConRadius(ND_FiTrunk);
    FiExitBox_Origin[1] + T_ConcreteMin + ConRadius(ND_FiTrunk);
    FiExitBox_Origin[2] - CouplingLength(ND_FiExitWaste) + SocketDepth(ND_FiExitWaste)
] = [1.79793; -0.0555658; 3.40851] m
FiFerncoBwCoupling_Origin := [Fi_Origin[0]; FiBwInletCoupling_Origin[1]; Fi_Origin[2] + outerradius(ND_FiBwManBranch)]
FiFerncoCouplings_Origin := [Fi_Origin[0]; FiFerncoBwCoupling_Origin[1]; FiFerncoBwCoupling_Origin[2] + H_FiBottomLayer]
FiWallBwCoupling_Origin := [
    Fi_Origin[0] + T_FiWall + CouplingLength(ND_FiBwTrunk) - SocketDepth(ND_FiBwTrunk);
    FiBwInletCoupling_Origin[1];
    Fi_Origin[2] + outerradius(ND_FiBwManBranch)
]
FiWallCouplings_Origin := [
    Fi_Origin[0] + T_FiWall + CouplingLength(ND_FiTrunk) - SocketDepth(ND_FiTrunk);
    FiBwInletCoupling_Origin[1];
    Fi_Origin[2] + outerradius(ND_FiBwManBranch) + H_FiBottomLayer
]
# tank scripts
# Concrete Box Origin:
FiEntranceBox_dim := [L_FiEntrance; W_FiEntrance; H_FiEntrance]
FiExitBox_dim := [L_FiExit; W_FiEntrance; H_FiEntrance]
ZW_FiEntranceBwSS := Z_FiEntranceBottom + H_FiBwNoSuckAir = 3.67057 m
Z_FiSiphonOutlet := ZW_FiEntranceBwSS - HL_FiBwTotalSS = 1.99108 m
Z_FiSiphonInlet := Z_FiSiphonOutlet - H_FiSiphonNoSuckAir = 1.89108 m
Z_FiBottom := Z_FiSiphonInlet - H_FiFluidizedBed - H_FiFluidizedBedToSiphon = 3.88578e-16 m
H_Fi := Z_FiTop - Z_FiBottom = 4.5455 m
Z_FiOverflowBottom := min(Z_FiTop - H_FiOverflowMin, Z_FiOverflowWeir - H_FiOverflowWeirFreefall) = 4.15896 m
FiOverflowBox_Origin := [FiEntranceBox_Origin[0]; FiEntranceBox_Origin[1] - T_PlantWall - W_FiOverflow; Z_FiOverflowBottom]
FiDistBox_Origin := [FiOverflowBox_Origin[0] - L_FiOverflow - T_PlantWall; FiOverflowBox_Origin[1]; FiExitBox_Origin[2]]
FiOverflowBox_Origin[2] - T_PlantWall - (FiEntranceBox_Origin[2] - T_PlantWall) =  # error
Fi_dim := [L_Fi; W_Fi; H_Fi] = [1.48239; 1.49957; 4.5455] m
H_FiEntrance - (FiOverflowBox_Origin[2] - T_PlantWall - (FiEntranceBox_Origin[2] - T_PlantWall)) =  # error
H_FiOverflow := Z_FiTop - Z_FiOverflowBottom = 0.386538 m
4.681 - 4.764 = -0.083
FiDistBox_Dim := [L_FiExit; W_FiOverflow; H_FiEntrance]
H_FiEntranceBox - Fi_Origin[2] =  # error
FiOverflowBox_Dim := [
    L_FiOverflow;
    W_FiOverflow;
    H_FiEntrance - (FiOverflowBox_Origin[2] - T_PlantWall - (FiEntranceBox_Origin[2] - T_PlantWall))
]
# Origins and Dimensions
SedOutletCoupling1_Origin(N) := [
    Fi_Origin[0] + W_FiInletChannel + 5*T_PlantWall - T_FiWall + L_FiEntrance + L_FiExit + W_MpWalkway + W_PlantDC + W_SedInletChannel + T_SedWeir + ConRadius(ND_FiEntrancePipe);
    Fi_Origin[1] - N_SedTanks*W_Sed + W_Fi/2 + ConRadius(ND_FiBwTrunk) + N_SedTanks*(W_SedBay*N_SedBays) - ConRadius(ND_FiEntrancePipe) - (N - 1)*W_SedBay - T_PlantWall*floor((N - 1)/N_SedBays);
    Z_SedChannelBottom - SocketDepth(ND_FiEntrancePipe)
]
SedOutletVertPipe_Origin(N) := SedOutletCoupling1_Origin(N) + [0; 0; 2*SocketDepth(ND_FiEntrancePipe) - CouplingLength(ND_FiEntrancePipe)]
L_SedOutletVertPipe := 2*SocketDepth(ND_FiEntrancePipe) + max(0, T_ChannelWall - CouplingLength(ND_FiEntrancePipe))
SedOutletElbow_Origin(N) := SedOutletVertPipe_Origin(N) - [0; 0; L_SedOutletVertPipe]
SedOutletCoupling2_Origin(N) := [
    Fi_Origin[0] + W_FiInletChannel + 4*T_PlantWall + T_FiWall + L_FiEntrance + L_FiExit + W_MpWalkway + W_PlantDC + CouplingLength(ND_FiEntrancePipe) - SocketDepth(ND_FiEntrancePipe);
    SedOutletElbow_Origin(N)[1];
    -ElbowRadius(ND_FiEntrancePipe) + SedOutletElbow_Origin(N)[2]
]
FiInletCoupling_Origin(N) := [
    FiInletChannel_Origin[0] + CouplingLength(ND_FiEntrancePipe) - SocketDepth(ND_FiEntrancePipe);
    SedOutletCoupling2_Origin(N)[1];
    FiInletChannel_Origin[2] + ElbowRadius(ND_FiEntrancePipe)
]
L_FiInletPipe := SedOutletCoupling2_Origin(1)[0] - CouplingLength(ND_FiEntrancePipe) + SocketDepth(ND_FiEntrancePipe) - FiInletCoupling_Origin(1)[0]
# Inlet Channel Concrete
LayerFiInletChannel := layer_new("FiInletChannelCon", grey)
FiInletChannel := Tank(FiInletChannel_Origin, [W_FiInletChannel; L_FiInletChannel; H_FiEntrance], T_ChannelWall)
FreezeFiInletChannel := FreezeLayer("FiInletChannelCon")
FiInletChannelConScript := stack(LayerFiInletChannel, FiInletChannel, FreezeFiInletChannel)
# Inlet Channel Coupling(s)
FiInletFittingLayer := layer_new("FiInletFittingsPlu", green)
FiInletFittingFrz := FreezeLayer("FiInletFittingsPlu")
FiInletCouplingScript :=
    Local ← FiInletFittingLayer
    for i ∈ 1 .. N_FiEntrancePipes
        Local ← stack(Local, CouplingSUBF(FiInletCoupling_Origin(i), [0; 0]*deg, ND_FiEntrancePipe, PS_Default, ["FiInletChannelCon"]))
    return stack(Local, FiInletFittingFrz)
# These aren't needed for the modular design!
# Inlet Pipes from Sedimentation
FiInletPipeLayer := layer_new("FiInletPipePlu", blue)
FiInletPipeFrz := FreezeLayer("FiInletPipePlu")
FiInletPipe :=
    Local ← FiInletPipeLayer
    for i ∈ 1 .. N_FiEntrancePipes
        Local ← stack(Local, PipeSUBF([
            SedOutletCoupling2_Origin(i)[0] - CouplingLength(ND_FiEntrancePipe) + SocketDepth(ND_FiEntrancePipe);
            SedOutletCoupling2_Origin(i)[1];
            FiInletChannel_Origin[2] + ElbowRadius(ND_FiEntrancePipe)
        ], L_FiInletPipe, [0; 0]*deg, ND_FiEntrancePipe, PS_Default, ["FiInletChannelCon"]))
    return Local
FiInletPipeScript := stack(FiInletPipeLayer, FiInletPipe, FiInletPipeFrz)
FiInletChannelScript := stack(FiInletChannelConScript)
LayerFiTank := layer_new("FiTankCon", grey)
FiTank := Tank(Fi_Origin, Fi_dim, T_FiWall)
FiSiphonManLedgeL := BoxF([
    Fi_Origin[0];
    Fi_Origin[1] + T_ConcreteMin + ConRadius(ND_FiSiphon) - 2*S_Fitting;
    Z_FiSiphonInlet - ConRadius(ND_FiSiphon) - outerradius(ND_FiSiphon)
], [
    Fi_Origin[0] - T_ConcreteMin;
    Fi_Origin[1] + T_ConcreteMin + ConRadius(ND_FiSiphon) + 2*S_Fitting;
    Z_FiSiphonInlet - ConRadius(ND_FiSiphon) - outerradius(ND_FiSiphon) - T_ConcreteMin
], [0; 0; 0]*deg)
FiSiphonManLedgeR := BoxF([
    Fi_Origin[0] - L_Fi;
    Fi_Origin[1] + T_ConcreteMin + ConRadius(ND_FiSiphon) - 2*S_Fitting;
    Z_FiSiphonInlet - ConRadius(ND_FiSiphon) - outerradius(ND_FiSiphon)
], [
    Fi_Origin[0] - L_Fi + T_ConcreteMin;
    Fi_Origin[1] + T_ConcreteMin + ConRadius(ND_FiSiphon) + 2*S_Fitting;
    Z_FiSiphonInlet - ConRadius(ND_FiSiphon) - outerradius(ND_FiSiphon) - T_ConcreteMin
], [0; 0; 0]*deg)
LayerFiTankFreeze := FreezeLayer("FiTankCon")
FiTankScript := stack(LayerFiTank, FiTank, FiSiphonManLedgeL, FiSiphonManLedgeR, Union_All, LayerFiTankFreeze)
# Fernco Couplings
LayerFiFernco := layer_new("FiFerncoCouplingsPlu", purple)
FiFerncoBwCoupling := FerncoCouplingF(FiFerncoBwCoupling_Origin, [0; 0; 0]*deg, ND_FiBwTrunk, L_FiManFerncoCoupling)
FiFerncoCoupling := FerncoCouplingF(FiFerncoCouplings_Origin, [0; 0; 0]*deg, ND_FiTrunk, L_FiManFerncoCoupling)
ArrayFiManifoldLast := ArrayLast(N_FiLayer, 1, H_FiLayer)
LayerFiFerncoFreeze := FreezeLayer("FiFerncoCouplingsPlu")
FiFerncoScript := stack(LayerFiFernco, FiFerncoBwCoupling, FiFerncoCoupling, view("f"), ArrayFiManifoldLast, view("t"), LayerFiFerncoFreeze)
# Filter Wall Couplings
LayerFiFittingPlu := layer_new("FiFittingsPlu", green)
FiWallBwCoupling := CouplingF(FiWallBwCoupling_Origin, [0; 0]*deg, ND_FiBwTrunk, PS_Default)
FiWallCoupling := CouplingF(FiWallCouplings_Origin, [0; 0]*deg, ND_FiTrunk, PS_Default)
LayerFiFittingFrz := FreezeLayer("FiFittingsPlu")
FiWallCouplingScript := stack(LayerFiFittingPlu, FiWallBwCoupling, FiWallCoupling, view("f"), ArrayFiManifoldLast, view("t"), LayerFiFittingFrz)
# Through-wall Pipes
LayerFiPipePlu := layer_new("FiPipePlu", blue)
FiBwConPipe := PipeSUBF(FiWallBwCoupling_Origin - [CouplingLength(ND_FiBwTrunk) - 2*SocketDepth(ND_FiBwTrunk); 0 m; 0 m], L_FiManFerncoCoupling/2 + T_FiWall + SocketDepth(ND_FiBwTrunk), [0; 0; 0]*deg, ND_FiBwTrunk, PS_Default, ["FiTankCon"])
FiConPipe1 := PipeSUBF(FiWallCouplings_Origin + [-CouplingLength(ND_FiTrunk) + 2*SocketDepth(ND_FiTrunk); 0 m; 0 m], L_FiManFerncoCoupling/2 + T_FiWall + SocketDepth(ND_FiTrunk), [0; 0; 0]*deg, ND_FiTrunk, PS_Default, ["FiTankCon"])
FiConPipe2 := PipeSUBF(FiWallCouplings_Origin + [-CouplingLength(ND_FiTrunk) + 2*SocketDepth(ND_FiTrunk); 0 m; H_FiLayer], L_FiManFerncoCoupling/2 + T_FiWall + SocketDepth(ND_FiTrunk), [0; 0; 0]*deg, ND_FiTrunk, PS_Default, ["FiTankCon"])
FiConPipe3 := PipeSUBF(FiWallCouplings_Origin + [-CouplingLength(ND_FiTrunk) + 2*SocketDepth(ND_FiTrunk); 0 m; 2*H_FiLayer], L_FiManFerncoCoupling/2 + T_FiWall + SocketDepth(ND_FiTrunk), [0; 0; 0]*deg, ND_FiTrunk, PS_Default, ["FiTankCon"])
FiConPipe4 := PipeSUBF(FiWallCouplings_Origin + [-CouplingLength(ND_FiTrunk) + 2*SocketDepth(ND_FiTrunk); 0 m; 3*H_FiLayer], L_FiManFerncoCoupling/2 + T_FiWall + SocketDepth(ND_FiTrunk), [0; 0; 0]*deg, ND_FiTrunk, PS_Default, ["FiTankCon"])
FiConPipe5 := PipeSUBF(FiWallCouplings_Origin + [-CouplingLength(ND_FiTrunk) + 2*SocketDepth(ND_FiTrunk); 0 m; 4*H_FiLayer], L_FiManFerncoCoupling/2 + T_FiWall + SocketDepth(ND_FiTrunk), [0; 0; 0]*deg, ND_FiTrunk, PS_Default, ["FiTankCon"])
FiConPipe6 := PipeSUBF(FiWallCouplings_Origin + [-CouplingLength(ND_FiTrunk) + 2*SocketDepth(ND_FiTrunk); 0 m; 5*H_FiLayer], L_FiManFerncoCoupling/2 + T_FiWall + SocketDepth(ND_FiTrunk), [0; 0; 0]*deg, ND_FiTrunk, PS_Default, ["FiTankCon"])
LayerFiPipeFrz := FreezeLayer("FiPipePlu")
FiWallPipeScript := stack(LayerFiPipePlu, FiBwConPipe, FiConPipe1, FiConPipe2, FiConPipe3, FiConPipe4, FiConPipe5, FiConPipe6, LayerFiPipeFrz)
FiManWallScript := stack(FiFerncoScript, FiWallCouplingScript, FiWallPipeScript)
# Filter Box Manifold Connections: Fernco Couplings, Outer Wall Couplings, and Through-wall Pipes
# Manifold Trunks and Branch Receivers
# Branch Receivers
LayerFiManPipe := layer_new("FiManPipePlu", blue)
FiBranchHolder := PipeF([
    Fi_Origin[0] - CapThickness(ND_FiBranchHolder) - S_FiManAssembly;
    Fi_Origin[1] + ConRadius(ND_FiBwBranchHolder) + S_FiManAssembly;
    Fi_Origin[2] + H_FiBottomLayer + outerradius(ND_FiBwManBranch)
], L_Fi - 2*CapThickness(ND_FiBranchHolder) - 2*S_FiManAssembly, [0; 0]*deg, ND_FiBranchHolder, PS_Default)
LayerFiManCaps := layer_new("FiManCapPlu", green)
FiBranchHolderCapRight := CapF([
    Fi_Origin[0] - CapThickness(ND_FiBranchHolder) - S_FiManAssembly;
    Fi_Origin[1] + ConRadius(ND_FiBwBranchHolder) + S_FiManAssembly;
    Fi_Origin[2] + H_FiBottomLayer + outerradius(ND_FiBwManBranch)
], [0; 0]*deg, ND_FiBranchHolder)
FiBranchHolderCapLeft := CapF([
    Fi_Origin[0] - L_Fi + S_FiManAssembly + CapThickness(ND_FiBranchHolder);
    Fi_Origin[1] + ConRadius(ND_FiBwBranchHolder) + S_FiManAssembly;
    Fi_Origin[2] + H_FiBottomLayer + outerradius(ND_FiBwManBranch)
], [180; 0]*deg, ND_FiBranchHolder)
ArrayFiBranchHolder := Array_All(2, 1, W_Fi - 2*ConRadius(ND_FiBwBranchHolder) - 2*S_FiManAssembly)
FiManBranchRecThaw := ThawMultiple(["FiManPipePlu"; "FiManCapPlu"])
FiManPipeFrz := FreezeLayer("FiManPipePlu")
FiManCapFrz := FreezeLayer("FiManCapPlu")
FiManBranchRecFrz := FreezeMultiple(["FiManPipePlu"; "FiManCapPlu"])
FiBranchHolderScript := stack(LayerFiManPipe, FiBranchHolder, FiManPipeFrz, LayerFiManCaps, FiBranchHolderCapRight, FiBranchHolderCapLeft, FiManCapFrz, FiManBranchRecThaw, ArrayFiBranchHolder, FiManBranchRecFrz)
# Manifold Trunks
SelectFiManPipes := SelectLayer("FiManPipePlu")
FiTrunk := PipeF([
    Fi_Origin[0] - L_FiManFerncoCoupling/2;
    FiBwInletCoupling_Origin[1];
    Fi_Origin[2] + H_FiBottomLayer + outerradius(ND_FiBwManBranch)
], L_FiTrunk, [0; 0]*deg, ND_FiTrunk, PS_Default)
SelectFiManCaps := SelectLayer("FiManCapPlu")
FiTrunkCap := CapF([
    Fi_Origin[0] - L_FiManFerncoCoupling/2 - L_FiTrunk;
    FiBwInletCoupling_Origin[1];
    Fi_Origin[2] + H_FiBottomLayer + outerradius(ND_FiBwManBranch)
], [180; 0]*deg, ND_FiTrunk)
FiTrunkScript := stack(SelectFiManPipes, FiTrunk, FiManPipeFrz, SelectFiManCaps, FiTrunkCap, FiManCapFrz)
# Trunk and Branch Receiver Holes and Array
FiTrunkOrifice := CylinderF([
    Fi_Origin[0] - L_FiManFerncoCoupling - B_FiManifoldBranch/2;
    Fi_Origin[1] + S_FiManAssembly + ConRadius(ND_FiBwBranchHolder);
    Fi_Origin[2] + H_FiBottomLayer + outerradius(ND_FiBwManBranch)
], outerradius(ND_FiManBranch), W_Fi - 2*ConRadius(ND_FiBwBranchHolder) - 2*S_FiManAssembly, [-90; 0]*deg)
ArrayFiTrunkOrifice := ArrayLast(1, N_FiManBranch/2, -B_FiManifoldBranch)
SubtractFiManPipeOrifices := SubtractF(["FiManPipePlu"], "DeleteMe")
SubtractFiManCapOrifices := SubtractF(["FiManCapPlu"], "DeleteMe")
ArrayFiTrunks := array_all(N_FiLayer, 1, H_FiLayer)
FiManTrunkOrificeScript := stack(FiTrunkOrifice, ArrayFiTrunkOrifice, GroupDelete, SubtractFiManPipeOrifices, FiTrunkOrifice, ArrayFiTrunkOrifice, GroupDelete, SubtractFiManCapOrifices, SelectFiManPipes, SelectFiManCaps, view("f"), ArrayFiTrunks, view("t"), FiManPipeFrz, FiManCapFrz)
# Backwash Trunk
FiBwTrunk := PipeF([
    Fi_Origin[0] - L_FiManFerncoCoupling/2;
    FiBwInletCoupling_Origin[1];
    Fi_Origin[2] + outerradius(ND_FiBwManBranch)
], L_FiBwTrunk, [0; 0]*deg, ND_FiBwTrunk, PS_Default)
FiBwTrunkCap := CapF([
    Fi_Origin[0] - L_FiManFerncoCoupling/2 - L_FiBwTrunk;
    FiBwInletCoupling_Origin[1];
    Fi_Origin[2] + outerradius(ND_FiBwManBranch)
], [180; 0; 0]*deg, ND_FiBwTrunk)
FiBwManTrunkScript := stack(SelectFiManPipes, FiBwTrunk, FiManPipeFrz, SelectFiManCaps, FiBwTrunkCap, FiManCapFrz)
# Backwash Branch Receivers
FiBwBranchReceiver := PipeF([
    Fi_Origin[0] - CapThickness(ND_FiBwBranchHolder) - S_FiManAssembly;
    Fi_Origin[1] + ConRadius(ND_FiBwBranchHolder) + S_FiManAssembly;
    Fi_Origin[2] + outerradius(ND_FiBwManBranch)
], L_Fi - 2*CapThickness(ND_FiBranchHolder) - 2*S_FiManAssembly, [0; 0]*deg, ND_FiBwBranchHolder, PS_Default)
FiBwBranchReceiverCapR := CapF([
    Fi_Origin[0] - CapThickness(ND_FiBwBranchHolder) - S_FiManAssembly;
    Fi_Origin[1] + ConRadius(ND_FiBwBranchHolder) + S_FiManAssembly;
    Fi_Origin[2] + outerradius(ND_FiBwManBranch)
], [0; 0; 0]*deg, ND_FiBwBranchHolder)
FiBwBranchReceiverCapL := CapF([
    Fi_Origin[0] - L_Fi + S_FiManAssembly + CapThickness(ND_FiBwBranchHolder);
    Fi_Origin[1] + ConRadius(ND_FiBwBranchHolder) + S_FiManAssembly;
    Fi_Origin[2] + outerradius(ND_FiBwManBranch)
], [180; 0; 0]*deg, ND_FiBwBranchHolder)
ArrayFiBwBranchHolder := ArrayLast(2, 1, W_Fi - 2*ConRadius(ND_FiBwBranchHolder) - 2*S_FiManAssembly)
FiBwBranchReceiverScript := stack(SelectFiManPipes, FiBwBranchReceiver, ArrayFiBwBranchHolder, FiManPipeFrz, SelectFiManCaps, FiBwBranchReceiverCapR, ArrayFiBwBranchHolder, FiBwBranchReceiverCapL, ArrayFiBwBranchHolder, FiManCapFrz)
# Backwash Trunk and Branch Receiver Orifices
FiBwTrunkOrifice := CylinderF([
    Fi_Origin[0] - L_FiManFerncoCoupling - B_FiManifoldBranch/2;
    Fi_Origin[1] + ConRadius(ND_FiBwBranchHolder) + S_FiManAssembly;
    Fi_Origin[2] + outerradius(ND_FiBwManBranch)
], outerradius(ND_FiBwManBranch), W_Fi - 2*ConRadius(ND_FiBwBranchHolder) - 2*S_FiManAssembly, [-90; 0]*deg)
FiBwTrunkOrificeScript := stack(FiBwTrunkOrifice, ArrayFiTrunkOrifice, GroupDelete, SubtractFiManPipeOrifices, FiBwTrunkOrifice, ArrayFiTrunkOrifice, GroupDelete, SubtractFiManCapOrifices)
# Filter Box Floor Cutouts
FiBwTrunkCutout := BoxF([
    Fi_Origin[0];
    Fi_Origin[1] + W_Fi/2 - ConRadius(ND_FiBwTrunk);
    Fi_Origin[2] - max(ConRadius(ND_FiBwTrunk), FerncoOuterDiameter(ND_FiBwTrunk)/2) + outerradius(ND_FiBwManBranch)
], [Fi_Origin[0] - L_Fi; Fi_Origin[1] + W_Fi/2 + ConRadius(ND_FiBwTrunk); Fi_Origin[2]], [0; 0; 0]*deg)
FiBwBranchHolderCutout1 := BoxF([
    Fi_Origin[0];
    Fi_Origin[1];
    Fi_Origin[2] - ConRadius(ND_FiBwBranchHolder) + outerradius(ND_FiBwManBranch)
], [
    Fi_Origin[0] - L_Fi;
    Fi_Origin[1] + S_FiManAssembly + 2*ConRadius(ND_FiBwBranchHolder);
    Fi_Origin[2]
], [0; 0; 0]*deg)
FiBwBranchHolderCutout2 := BoxF([
    Fi_Origin[0];
    Fi_Origin[1] + W_Fi;
    Fi_Origin[2] - ConRadius(ND_FiBwBranchHolder) + outerradius(ND_FiBwManBranch)
], [
    Fi_Origin[0] - L_Fi;
    Fi_Origin[1] + W_Fi - 2*ConRadius(ND_FiBwBranchHolder) - S_FiManAssembly;
    Fi_Origin[2]
], [0; 0; 0]*deg)
SubtractBwTrunkCutouts := SubtractF(["FiTankCon"], "DeleteMe")
FiBoxFloorCutoutScript := stack(FiBwTrunkCutout, FiBwBranchHolderCutout1, FiBwBranchHolderCutout2, GroupDelete, SubtractBwTrunkCutouts)
FiTrunkReceiverScript := stack(FiBranchHolderScript, FiTrunkScript, FiManTrunkOrificeScript, FiBwManTrunkScript, FiBwBranchReceiverScript, FiBwTrunkOrificeScript, FiBoxFloorCutoutScript)
# Manifold Branches
LayerMan := layer_new("FiManBranchPlu", blue3)
FiManBranch := PipeF(Fi_Origin + [
    -L_FiManFerncoCoupling - B_FiManifoldBranch/2;
    S_FiManAssembly + ConRadius(ND_FiBwBranchHolder) + outerradius(ND_FiBranchHolder) - L_FiManBranchExt;
    outerradius(ND_FiBwManBranch) + H_FiBottomLayer
], L_FiManBranch, [-90; 0]*deg, ND_FiManBranch, PS_FiBranch)
FreezeFiManLayer := FreezeLayer("FiManBranchPlu")
FiManBranchSlot := BoxF(Fi_Origin + [
    -L_FiManFerncoCoupling - B_FiManifoldBranch/2 - outerradius(ND_FiManBranch);
    S_FiManAssembly + ConRadius(ND_FiBwBranchHolder) + outerradius(ND_FiBranchHolder) + B_FiManSlot/2;
    outerradius(ND_FiBwManBranch) + H_FiBottomLayer + H_FiManCenterToSlot
], Fi_Origin + [
    -L_FiManFerncoCoupling - B_FiManifoldBranch/2 + outerradius(ND_FiManBranch);
    S_FiManAssembly + ConRadius(ND_FiBwBranchHolder) + outerradius(ND_FiBranchHolder) + B_FiManSlot/2 + W_FiManSlots;
    outerradius(ND_FiBwManBranch) + H_FiBottomLayer + outerradius(ND_FiManBranch)
], [0; 0; 0]*deg)
MirrorFiManBranchSlot := MirrorLast([Fi_Origin[1] + 0 m; Fi_Origin[2] + outerradius(ND_FiBwManBranch) + H_FiBottomLayer], [Fi_Origin[1] + zc; Fi_Origin[2] + outerradius(ND_FiBwManBranch) + H_FiBottomLayer], "N")
ArrayFiManBranchSlot := array_all(N_FiManSlotsPerRow, 1, B_FiManSlot)
SubtractFiManSlots := SubtractF(["FiManBranchPlu"], "DeleteMe")
SelectFiManBranch := SelectLayer("FiManBranchPlu")
ArrayFiMan := array_all(N_FiLayer, 1, H_FiLayer)
# Do not stack unless you are drawing only the slotted pipes. The slots make the 3D model unmanagable.
FiBranchScriptSlots := stack(LayerMan, FiManBranch, FreezeFiManLayer, FiManBranchSlot, view("r"), MirrorFiManBranchSlot, view("t"), ArrayFiManBranchSlot, GroupDelete, SubtractFiManSlots, SelectFiManBranch, BrepAll, view("f"), ArrayFiMan, view("t"))
FiBranchScript := stack(LayerMan, FiManBranch, view("f"), ArrayFiMan, view("t"))
BwManBranch := PipeF(Fi_Origin + [
    -L_FiManFerncoCoupling - B_FiManifoldBranch/2;
    S_FiManAssembly + ConRadius(ND_FiBwBranchHolder) + outerradius(ND_FiBwBranchHolder) - L_FiManBranchExt;
    outerradius(ND_FiBwManBranch)
], L_FiBwManBranch, [-90; 0]*deg, ND_FiBwManBranch, PS_FiBranch)
FiBwManBranchSlot := BoxF(Fi_Origin + [
    -L_FiManFerncoCoupling - B_FiManifoldBranch/2 - outerradius(ND_FiBwManBranch);
    S_FiManAssembly + ConRadius(ND_FiBwBranchHolder) + outerradius(ND_FiBwBranchHolder) + B_FiBwManSlot/2;
    outerradius(ND_FiBwManBranch) + H_FiBwManCenterToSlot
], Fi_Origin + [
    -L_FiManFerncoCoupling - B_FiManifoldBranch/2 + outerradius(ND_FiBwManBranch);
    S_FiManAssembly + ConRadius(ND_FiBwBranchHolder) + outerradius(ND_FiBwBranchHolder) + B_FiBwManSlot/2 + W_FiManSlots;
    outerdiameter(ND_FiBwManBranch)
], [0; 0; 0]*deg)
ArrayFiBwManBranchSlot := ArrayLast(N_FiBwManSlotsPerRow, 1, B_FiBwManSlot)
MirrorFiManBranches := Mirror3dAll("zx", [Fi_Origin[0]; Fi_Origin[1] + W_Fi/2], "n")
ArrayManBranches := array_all(1, N_FiManBranch/2, -B_FiManifoldBranch)
# Do not stack unless you are drawing only the slotted pipes. The slots make the 3D model unmanagable.
FiBwBranchScriptSlots := stack(BwManBranch, FreezeFiManLayer, FiBwManBranchSlot, ArrayFiBwManBranchSlot, GroupDelete, SubtractFiManSlots, SelectFiManBranch, BrepAll, ArrayManBranches, MirrorFiManBranches, FreezeFiManLayer)
FiBwBranchScript := stack(BwManBranch, ArrayManBranches, MirrorFiManBranches, FreezeFiManLayer)
FiManBranchScript := stack(FiBranchScript, FiBwBranchScript)
FiManifoldScript := stack(FiManWallScript, FiTrunkReceiverScript, FiManBranchScript)
# Auxiliary Box Concrete
# Entrance and Exit Boxes
FiEntranceBox_dim =  # error
FiEntranceBox_Origin =  # error
LayerFiEntExitBox := layer_new("FiEntExitBoxCon", grey)
FiEntBox := Tank(FiEntranceBox_Origin, FiEntranceBox_dim, T_PlantWall)
FiExitBox_Origin =  # error
FiExitBox := Tank(FiExitBox_Origin, FiExitBox_dim, T_PlantWall)
FiExitBox_dim =  # error
LayerFiEntExitBoxFrz := FreezeLayer("FiEntExitBoxCon")
FiDistBox_Origin =  # error
FiDistBox_Dim =  # error
# Overflow and Distribution Boxes
LayerFiOverflowDistBox := layer_new("FiOverflowDistBoxCon", grey)
FiOverflowBox_Origin =  # error
FiOverflowBox_Dim =  # error
FiDistBox := Tank(FiDistBox_Origin, FiDistBox_Dim, T_PlantWall)
FiOverflowBox := Tank(FiOverflowBox_Origin, FiOverflowBox_Dim, T_PlantWall)
.63 - .467 = 0.163
FiOverflowBoxBase := BoxF(FiOverflowBox_Origin + [T_PlantWall; -T_PlantWall; -T_PlantWall], [
    FiOverflowBox_Origin[0] - FiOverflowBox_Dim[0];
    FiOverflowBox_Origin[1] + FiOverflowBox_Dim[1] + T_PlantWall;
    FiEntranceBox_Origin[2] - T_PlantWall
], [0; 0; 0]*deg)
FiDistBox_Dim[2] - FiOverflowBox_Dim[2] =  # error
FiEntranceBox_Origin[2] + FiEntranceBox_dim[2] =  # error
LayerFiOverflowDistBoxFrz := FreezeLayer("FiOverflowDistBoxCon")
FiOverflowBox_Origin[2] - T_PlantWall - (FiEntranceBox_Origin[2] - T_PlantWall) =  # error
Z_FiAirRemovalBlockBottom := 0.15*S_FiEntranceBaffle + Z_FiEntranceBottom
# Entrance Box Air Removal
FiAirRemovalBlockSlot := BoxF([
    FiEntranceBox_Origin[0] - S_FiEntranceBaffle - T_SedWeir - S_FiBaffleToBlock;
    FiEntranceBox_Origin[1] - T_ConcreteMin;
    Z_FiAirRemovalBlockBottom
], [
    FiEntranceBox_Origin[0] - S_FiEntranceBaffle - T_SedWeir - S_FiBaffleToBlock;
    FiEntranceBox_Origin[1] + T_ConcreteMin;
    Z_FiEntranceBottom + H_FiEntrance
] + [-W_FiAirRemovalBlock; W_FiEntrance; 0], [0; 0; 0])
FiBaffle := BoxF([FiEntranceBox_Origin[0]; FiEntranceBox_Origin[1] - T_ConcreteMin; Z_FiEntranceBottom] + [-S_FiEntranceBaffle; 0; S_FiEntranceBaffle], [FiEntranceBox_Origin[0]; FiEntranceBox_Origin[1]; Z_FiEntranceBottom] + [-S_FiEntranceBaffle - T_SedWeir; W_FiEntrance + T_ConcreteMin; H_FiEntrance], [0; 0; 0])
FiSubtractBaffleEntSlots := SubtractF(["FiEntExitBoxCon"], "DeleteMe")
FiSubtractBaffleOverflowSlots := SubtractF(["FiOverflowDistBoxCon"], "DeleteMe")
ArrayFiBaffleSlots := array_all(2, 1, -(W_FiEntrance + W_FiOverflow + 2*T_PlantWall))
FiBaffleSlots :=
    stack(FiAirRemovalBlockSlot, FiBaffle, GroupDelete, FiSubtractBaffleEntSlots, FiAirRemovalBlockSlot, FiBaffle, GroupDelete, FiSubtractBaffleOverflowSlots) if N_Fi == 1
    stack(FiAirRemovalBlockSlot, FiBaffle, GroupDelete, FiSubtractBaffleEntSlots, FiAirRemovalBlockSlot, FiBaffle, ArrayFiBaffleSlots, GroupDelete, FiSubtractBaffleOverflowSlots) otherwise
FiBaffleLayer := layer_new("FiBaffles", ltgrey)
Z_FiAirRemovalBlockTop := ZW_FiEntranceBwSS - H_FiAirRemovalBlockSubmerged = 3.62057 m
FiAirRemovalBlock := BoxF([
    FiEntranceBox_Origin[0] - S_FiEntranceBaffle - T_SedWeir - S_FiBaffleToBlock;
    FiEntranceBox_Origin[1] - T_ConcreteMin;
    Z_FiAirRemovalBlockBottom
], [
    FiEntranceBox_Origin[0] - S_FiEntranceBaffle - 2*T_SedWeir - S_FiBaffleToBlock;
    FiEntranceBox_Origin[1] + T_ConcreteMin + W_FiEntrance;
    Z_FiAirRemovalBlockTop
], [0; 0; 0])
FiBaffleLayerFrz := FreezeLayer("FiBaffles")
FiBaffles := stack(FiBaffleLayer, FiBaffle, FiAirRemovalBlock, FiBaffleLayerFrz)
FiAuxBoxScript := stack(LayerFiEntExitBox, FiEntBox, FiExitBox, Union_All, LayerFiEntExitBoxFrz, LayerFiOverflowDistBox, FiDistBox, FiOverflowBox, FiOverflowBoxBase, LayerFiOverflowDistBoxFrz, FiBaffleSlots, FiBaffles)
# Auxiliary Box Plumbing (not filter entrance or exit)
Z_FiOverflowVertDrainPipeStart := Z_FiOverflowBottom - CouplingLength(ND_FiEntOverflow) + SocketDepth(ND_FiEntOverflow) = 4.05721 m
Z_FiOverflowVertDrainPipeEnd := Z_FiOverflowBottom - H_FiEntOverflowDrop + ElbowRadius(ND_FiEntOverflow) = 2.69561 m
X_FiOverflowHorizDrainPipeStart := FiInletChannel_Origin[0] + T_PlantWall - CouplingLength(ND_FiEntOverflow) + SocketDepth(ND_FiEntOverflow)
X_FiOverflowHorizDrainPipeEnd := FiEntranceBox_Origin[0] - L_FiEntrance/2 + ElbowRadius(ND_FiEntOverflow)
# Auxiliary Fittings
FiAuxFittingLayer := layer_new("FiAuxFittingPlu", green)
FiAuxRemovableLayer := layer_new("FiAuxRemovablePlu", red)
SelectFiAuxRemovables := SelectLayer("FiAuxRemovablePlu")
FiBypassCoupling := CouplingSUBF([
    FiExitBox_Origin[0] + CouplingLength(ND_FiBypass) - SocketDepth(ND_FiBypass);
    FiEntranceBox_Origin[1] - T_PlantWall - W_FiOverflow/2;
    Z_FiTop - S_Fitting - ConRadius(ND_FiBypass)
], [0; 0]*deg, ND_FiBypass, PS_Default, ["FiOverflowDistBoxCon"])
FiBypassCap := CapF([
    FiExitBox_Origin[0] + CouplingLength(ND_FiBypass) + CapHeight(ND_FiBypass) - CapThickness(ND_FiBypass);
    FiEntranceBox_Origin[1] - T_PlantWall - W_FiOverflow/2;
    Z_FiTop - S_Fitting - ConRadius(ND_FiBypass)
], [0; 0; 0]*deg, ND_FiBypass)
FiOverflowBoxCoupling := CouplingSUBF([
    FiEntranceBox_Origin[0] - L_FiEntrance/2;
    FiEntranceBox_Origin[1] - T_PlantWall - W_FiOverflow/2;
    Z_FiOverflowVertDrainPipeStart
], [0; 90]*deg, ND_FiEntOverflow, PS_Default, ["FiOverflowDistBoxCon"])
FiAuxFittingFrz := FreezeLayer("FiAuxFittingPlu")
FiAuxRemovableFrz := FreezeLayer("FiAuxRemovablePlu")
FiAuxFittingScript := stack(FiAuxFittingLayer, FiBypassCoupling, FiOverflowBoxCoupling, FiAuxFittingFrz, FiAuxRemovableLayer, FiBypassCap, FiAuxRemovableFrz)
# Distribution Plumbing Start
FiDistFittingLayer := layer_new("FiDistFittingPlu", green)
Z_FiExitBottom := Z_FiEntranceBottom = 3.47057 m
FiDistCoupling := CouplingSUBF([
    FiExitBox_Origin[0] - L_FiExit/2;
    FiEntranceBox_Origin[1] - T_PlantWall - W_FiOverflow/2;
    FiDistBox_Origin[2] - SocketDepth(ND_DistPipe)
], [0; 270]*deg, ND_DistPipe, PS_Default, ["FiOverflowDistBoxCon"])
Z_FiDistPipe := Z_FiExitBottom - H_FiDistDrop = 2.35502 m
L_FiDistPipe1 := Z_FiExitBottom - CouplingLength(ND_DistPipe) + SocketDepth(ND_DistPipe) - (Z_FiDistPipe + ElbowRadius(ND_DistPipe))
FiDistElbow1 := ElbowF([
    FiExitBox_Origin[0] - L_FiExit/2;
    FiEntranceBox_Origin[1] - T_PlantWall - W_FiOverflow/2;
    FiDistBox_Origin[2] - CouplingLength(ND_DistPipe) + SocketDepth(ND_DistPipe) - L_FiDistPipe1
], [0; 0; 270]*deg, ND_DistPipe, PS_Default)
FiDistFittingFrz := FreezeLayer("FiDistFittingPlu")
FiDistPipeLayer := layer_new("FiDistPipePlu", blue)
FiDistPipe1 := PipeSUBF([
    FiExitBox_Origin[0] - L_FiExit/2;
    FiEntranceBox_Origin[1] - T_PlantWall - W_FiOverflow/2;
    FiDistBox_Origin[2] - CouplingLength(ND_DistPipe) + SocketDepth(ND_DistPipe)
], L_FiDistPipe1, [0; 270; 0]*deg, ND_DistPipe, PS_Default, ["FiOverflowDistBoxCon"])
FiDistPipeFrz := FreezeLayer("FiDistPipePlu")
FiDistStartScript := stack(FiDistFittingLayer, FiDistCoupling, FiDistElbow1, FiDistFittingFrz, FiDistPipeLayer, FiDistPipe1, FiDistPipeFrz)
# Auxiliary Pipes
FiAuxPipeLayer := layer_new("FiAuxPipePlu", blue)
FiBypassPipe1Horiz := PipeF([
    FiExitBox_Origin[0] + CouplingLength(ND_FiBypass) + CapHeight(ND_FiBypass) - CapThickness(ND_FiBypass);
    FiEntranceBox_Origin[1] - T_PlantWall - W_FiOverflow/2;
    Z_FiTop - S_Fitting - ConRadius(ND_FiBypass)
], CapHeight(ND_FiBypass) - CapThickness(ND_FiBypass) + SocketDepth(ND_FiBypass), [0; 0; 0]*deg, ND_FiBypass, PS_Default)
FiOverflowDrainPipeVert := PipeSUBF([
    FiEntranceBox_Origin[0] - L_FiEntrance/2;
    FiEntranceBox_Origin[1] - T_PlantWall - W_FiOverflow/2;
    Z_FiOverflowVertDrainPipeStart
], Z_FiOverflowVertDrainPipeStart - Z_FiOverflowVertDrainPipeEnd, [0; 270]*deg, ND_FiEntOverflow, PS_Default, ["FiOverflowDistBoxCon"])
LayerFiAuxPipeFrz := FreezeLayer("FiAuxPipePlu")
FiAuxPipeScript := stack(FiAuxPipeLayer, FiOverflowDrainPipeVert, LayerFiAuxPipeFrz, SelectFiAuxRemovables, FiBypassPipe1Horiz, FiAuxRemovableFrz)
FiAuxPlumbingScript := stack(FiAuxFittingScript, FiDistStartScript, FiAuxPipeScript)
# Entrance and Exit Plumbing Until Filter Wall Coupling
# This is all of the piping between filter box, entrance and exit
# In means the pipe goes IN TO THE FILTER
# Out means it comes OUT OF THE FILTER
SelectFiPipeLayer := SelectLayer("FiPipePlu")
SelectFiFittingLayer := SelectLayer("FiFittingsPlu")
# Inlet 0 Pipes (backwash)
Z_FiInPipe0aStart := FiEntranceBox_Origin[2] - CouplingLength(ND_FiBwTrunk) + SocketDepth(ND_FiBwTrunk)
Z_FiInPipe0aEnd := Fi_Origin[2] + outerradius(ND_FiBwManBranch) + ShortTeeLength(ND_FiBwTrunk)
L_FiInPipe0a := FiBwInletCoupling_Origin[2] - Z_FiInPipe0aEnd = 3.09734 m
FiInPipe0a := PipeSUBF(FiBwInletCoupling_Origin, L_FiInPipe0a, [0; 270]*deg, ND_FiBwTrunk, PS_Default, ["FiEntExitBoxCon"])
X_FiBwTrunkPipeEnd := Fi_Origin[0] + T_FiWall + CouplingLength(ND_FiBwTrunk) - SocketDepth(ND_FiBwTrunk)
L_FiInPipe0b := FiBwInletCoupling_Origin[0] - TeeLength(ND_FiBwTrunk)/2 - X_FiBwTrunkPipeEnd = 1.91712 m
FiInPipe0b := PipeF([
    FiBwInletCoupling_Origin[0] - ShortTeeLength(ND_FiBwTrunk);
    FiBwInletCoupling_Origin[1];
    Z_FiInPipe0aEnd - ShortTeeLength(ND_FiBwTrunk)
], L_FiInPipe0b, [0; 0]*deg, ND_FiBwTrunk, PS_Default)
FiIn0PipeScript := stack(FiInPipe0a, FiInPipe0b)
# Inlet 0 Fittings (backwash)
FiEntBoxCoupling0 := CouplingSUBF(FiBwInletCoupling_Origin, [0; 90]*deg, ND_FiBwTrunk, PS_Default, ["FiEntExitBoxCon"])
FiInTee0a := TeeF([FiBwInletCoupling_Origin[0]; FiBwInletCoupling_Origin[1]; Z_FiInPipe0aEnd], [0; 0; 90]*deg, ND_FiBwTrunk, PS_Default)
FiInReducerLarge := CylinderF([
    FiBwInletCoupling_Origin[0] + ShortTeeLength(ND_FiBwTrunk) + 10 cm;
    FiBwInletCoupling_Origin[1];
    Z_FiInPipe0aEnd - ShortTeeLength(ND_FiBwTrunk)
], innerdiameter(ND_FiBwTrunk, PS_Default)/2, 10 cm, [0; 0]*deg)
FiInReducerSmall := CylinderF([
    FiBwInletCoupling_Origin[0] + ShortTeeLength(ND_FiBwTrunk) + 2*10*cm;
    FiBwInletCoupling_Origin[1];
    Z_FiInPipe0aEnd - ShortTeeLength(ND_FiBwTrunk)
], innerdiameter(3 in, PS_Default)/2, 10 cm, [0; 0]*deg)
FiValveLayer := layer_new("FiValvePlu", blue3)
FiInValve := insertdwg("https://confluence.cornell.edu/download/attachments/173604905/Fi-Scaled-Gate-Valve-Threaded.dwg", [
    FiBwInletCoupling_Origin[0] + ShortTeeLength(ND_FiBwTrunk) + 2*10*cm + 0.6*ValveLength(3 in);
    FiBwInletCoupling_Origin[1];
    Z_FiInPipe0aEnd - ShortTeeLength(ND_FiBwTrunk)
], 3 in/(1.16 m), 3 in/(1.16 m), 0 deg)
LayerFiValveFrz := FreezeLayer("FiValvePlu")
FiIn0FittingScript := stack(FiEntBoxCoupling0, FiInTee0a, FiInReducerLarge, FiInReducerSmall, LayerFiFittingFrz, FiValveLayer, FiInValve, LayerFiValveFrz, SelectFiFittingLayer)
# Inlet 1 Pipes
Z_FiInPipe1aEnd := Fi_Origin[2] + outerradius(ND_FiBwManBranch) + H_FiBottomLayer + H_FiLayer + ElbowRadius(ND_FiTrunk)
L_FiInPipe1a := FiInletCoupling1_Origin[2] - Z_FiInPipe1aEnd
FiInPipe1a := PipeSUBF(FiInletCoupling1_Origin, L_FiInPipe1a, [0; 270]*deg, ND_FiTrunk, PS_Default, ["FiEntExitBoxCon"])
X_FiTrunkPipeEnd := Fi_Origin[0] + T_FiWall + CouplingLength(ND_FiTrunk) - SocketDepth(ND_FiTrunk)
L_FiInPipe1b := FiInletCoupling1_Origin[0] - ElbowRadius(ND_FiTrunk) - X_FiTrunkPipeEnd
FiInPipe1b := PipeF([
    FiInletCoupling1_Origin[0] - ElbowRadius(ND_FiTrunk);
    FiBwInletCoupling_Origin[1];
    Z_FiInPipe1aEnd - ElbowRadius(ND_FiTrunk)
], L_FiInPipe1b, [0; 0]*deg, ND_FiTrunk, PS_Default)
FiIn1PipeScript := stack(FiInPipe1a, FiInPipe1b)
# Inlet 1 Fittings
FiEntBoxCoupling1 := CouplingSUBF(FiInletCoupling1_Origin, [0; 90]*deg, ND_FiTrunk, PS_Default, ["FiEntExitBoxCon"])
FiInElbow1a := ElbowF([FiInletCoupling1_Origin[0]; FiInletCoupling1_Origin[1]; Z_FiInPipe1aEnd], [0; 0; -90]*deg, ND_FiTrunk, PS_Default)
FiIn1FittingScript := stack(FiEntBoxCoupling1, FiInElbow1a)
# Inlet 2 Pipes
Z_FiInPipe2aEnd := Z_FiInPipe1aEnd + 2*H_FiLayer
X_FiInPipe2bEnd := FiExitCoupling1_Origin[0] - ConRadius(ND_FiTrunk) - T_ConcreteMin  # Gives 5 cm of clearance plus the elbow radius
L_FiInPipe2a := FiInletCoupling2_Origin[2] - Z_FiInPipe2aEnd
L_FiInPipe2b := FiInletCoupling2_Origin[0] - ElbowRadius(ND_FiTrunk) - X_FiInPipe2bEnd
FiInPipe2a := PipeSUBF(FiInletCoupling2_Origin, L_FiInPipe2a, [0; 270]*deg, ND_FiTrunk, PS_Default, ["FiEntExitBoxCon"])
FiInPipe2b := PipeF([
    FiInletCoupling2_Origin[0] - ElbowRadius(ND_FiTrunk);
    FiInletCoupling2_Origin[1];
    Z_FiInPipe2aEnd - ElbowRadius(ND_FiTrunk)
], L_FiInPipe2b, [0; 0]*deg, ND_FiTrunk, PS_Default)
Y_FiInPipe2cEnd := Fi_Origin[1] + W_Fi/2 - ElbowRadius(ND_FiTrunk)
L_FiInPipe2c := Y_FiInPipe2cEnd - (FiInletCoupling2_Origin[1] + ElbowRadius(ND_FiTrunk))
L_FiInPipe2d := X_FiInPipe2bEnd - 2*ElbowRadius(ND_FiTrunk) - X_FiTrunkPipeEnd
FiInPipe2c := PipeF([
    X_FiInPipe2bEnd - ElbowRadius(ND_FiTrunk);
    FiInletCoupling2_Origin[1] + ElbowRadius(ND_FiTrunk);
    Z_FiInPipe2aEnd - ElbowRadius(ND_FiTrunk)
], L_FiInPipe2c, [-90; 0]*deg, ND_FiTrunk, PS_Default)
FiInPipe2d := PipeF([
    X_FiInPipe2bEnd - 2*ElbowRadius(ND_FiTrunk);
    Y_FiInPipe2cEnd + ElbowRadius(ND_FiTrunk);
    Z_FiInPipe2aEnd - ElbowRadius(ND_FiTrunk)
], L_FiInPipe2d, [0; 0]*deg, ND_FiTrunk, PS_Default)
FiIn2PipeScript := stack(FiInPipe2a, FiInPipe2b, FiInPipe2c, FiInPipe2d)
# Inlet 2 Fittings
FiEntBoxCoupling2 := CouplingSUBF(FiInletCoupling2_Origin, [0; 90]*deg, ND_FiTrunk, PS_Default, ["FiEntExitBoxCon"])
FiInElbow2a := ElbowF([FiInletCoupling2_Origin[0]; FiInletCoupling2_Origin[1]; Z_FiInPipe2aEnd], [0; 0; -90]*deg, ND_FiTrunk, PS_Default)
FiInElbow2b := ElbowF([X_FiInPipe2bEnd; FiInletCoupling2_Origin[1]; Z_FiInPipe2aEnd - ElbowRadius(ND_FiTrunk)], [-90; 180; 0]*deg, ND_FiTrunk, PS_Default)
FiInElbow2c := ElbowF([
    X_FiInPipe2bEnd - ElbowRadius(ND_FiTrunk);
    Y_FiInPipe2cEnd;
    Z_FiInPipe2aEnd - ElbowRadius(ND_FiTrunk)
], [0; 0; 0]*deg, ND_FiTrunk, PS_Default)
FiIn2FittingScript := stack(FiEntBoxCoupling2, FiInElbow2a, FiInElbow2b, FiInElbow2c)
# Inlet 3 Pipes
Z_FiInPipe3aEnd := Z_FiInPipe2aEnd + 2*H_FiLayer
L_FiInPipe3a := FiInletCoupling3_Origin[2] - Z_FiInPipe3aEnd
FiInPipe3a := PipeSUBF(FiInletCoupling3_Origin, FiInletCoupling3_Origin[2] - Z_FiInPipe3aEnd, [0; 270]*deg, ND_FiTrunk, PS_Default, ["FiEntExitBoxCon"])
X_FiInPipe3bEnd := X_FiInPipe2bEnd
L_FiInPipe3b := FiInletCoupling3_Origin[0] - ElbowRadius(ND_FiTrunk) - X_FiInPipe3bEnd
FiInPipe3b := PipeF([
    FiInletCoupling3_Origin[0] - ElbowRadius(ND_FiTrunk);
    FiInletCoupling3_Origin[1];
    Z_FiInPipe3aEnd - ElbowRadius(ND_FiTrunk)
], L_FiInPipe3b, [0; 0]*deg, ND_FiTrunk, PS_Default)
Y_FiInPipe3cEnd := Y_FiInPipe2cEnd
L_FiInPipe3c := Y_FiInPipe3cEnd - (FiInletCoupling3_Origin[1] + ElbowRadius(ND_FiTrunk))
L_FiInPipe3d := X_FiInPipe3bEnd - 2*ElbowRadius(ND_FiTrunk) - X_FiTrunkPipeEnd
FiInPipe3c := PipeF([
    X_FiInPipe3bEnd - ElbowRadius(ND_FiTrunk);
    FiInletCoupling3_Origin[1] + ElbowRadius(ND_FiTrunk);
    Z_FiInPipe3aEnd - ElbowRadius(ND_FiTrunk)
], L_FiInPipe3c, [-90; 0]*deg, ND_FiTrunk, PS_Default)
FiInPipe3d := PipeF([
    X_FiInPipe3bEnd - 2*ElbowRadius(ND_FiTrunk);
    Y_FiInPipe3cEnd + ElbowRadius(ND_FiTrunk);
    Z_FiInPipe3aEnd - ElbowRadius(ND_FiTrunk)
], L_FiInPipe3d, [0; 0]*deg, ND_FiTrunk, PS_Default)
FiIn3PipeScript := stack(FiInPipe3a, FiInPipe3b, FiInPipe3c, FiInPipe3d)
# Inlet 3 Fittings
FiEntBoxCoupling3 := CouplingSUBF(FiInletCoupling3_Origin, [0; 90]*deg, ND_FiTrunk, PS_Default, ["FiEntExitBoxCon"])
FiInElbow3a := ElbowF([FiInletCoupling3_Origin[0]; FiInletCoupling3_Origin[1]; Z_FiInPipe3aEnd], [0; 0; -90]*deg, ND_FiTrunk, PS_Default)
FiInElbow3b := ElbowF([X_FiInPipe3bEnd; FiInletCoupling3_Origin[1]; Z_FiInPipe3aEnd - ElbowRadius(ND_FiTrunk)], [-90; 180; 0]*deg, ND_FiTrunk, PS_Default)
FiInElbow3c := ElbowF([
    X_FiInPipe3bEnd - ElbowRadius(ND_FiTrunk);
    Y_FiInPipe3cEnd;
    Z_FiInPipe3aEnd - ElbowRadius(ND_FiTrunk)
], [0; 0; 0]*deg, ND_FiTrunk, PS_Default)
FiIn3FittingScript := stack(FiEntBoxCoupling3, FiInElbow3a, FiInElbow3b, FiInElbow3c)
# Outlet 0 Pipes
Z_FiOutPipe0aEnd := Z_FiInPipe1aEnd + H_FiLayer
L_FiOutPipe0a := FiExitCoupling0_Origin[2] - Z_FiOutPipe0aEnd
L_FiOutPipe0b := FiExitCoupling0_Origin[0] - ElbowRadius(ND_FiTrunk) - X_FiTrunkPipeEnd
FiOutPipe0a := PipeSUBF(FiExitCoupling0_Origin, FiExitCoupling0_Origin[2] - Z_FiOutPipe0aEnd, [0; -90]*deg, ND_FiTrunk, PS_Default, ["FiEntExitBoxCon"])
FiOutPipe0b := PipeF([
    FiExitCoupling0_Origin[0] - ElbowRadius(ND_FiTrunk);
    FiExitCoupling0_Origin[1];
    Z_FiOutPipe0aEnd - ElbowRadius(ND_FiTrunk)
], L_FiOutPipe0b, [0; 0]*deg, ND_FiTrunk, PS_Default)
FiOut0PipeScript := stack(FiOutPipe0a, FiOutPipe0b)
# Outlet 0 Fittings
FiExChanCoupling0 := CouplingSUBF(FiExitCoupling0_Origin, [0; 90]*deg, ND_FiTrunk, PS_Default, ["FiEntExitBoxCon"])
FiOutElbow0a := ElbowF([FiExitCoupling0_Origin[0]; FiExitCoupling0_Origin[1]; Z_FiOutPipe0aEnd], [0; 0; -90]*deg, ND_FiTrunk, PS_Default)
FiOut0FittingScript := stack(FiExChanCoupling0, FiOutElbow0a)
# Outlet 1 Pipes
Z_FiOutPipe1aEnd := Z_FiOutPipe0aEnd + 2*H_FiLayer
L_FiOutPipe1a := FiExitCoupling1_Origin[2] - Z_FiOutPipe1aEnd
L_FiOutPipe1b := FiExitCoupling1_Origin[0] - ElbowRadius(ND_FiTrunk) - X_FiTrunkPipeEnd
FiOutPipe1a := PipeSUBF(FiExitCoupling1_Origin, L_FiOutPipe1a, [0; -90]*deg, ND_FiTrunk, PS_Default, ["FiEntExitBoxCon"])
FiOutPipe1b := PipeF([
    FiExitCoupling1_Origin[0] - ElbowRadius(ND_FiTrunk);
    FiExitCoupling1_Origin[1];
    Z_FiOutPipe1aEnd - ElbowRadius(ND_FiTrunk)
], L_FiOutPipe1b, [0; 0]*deg, ND_FiTrunk, PS_Default)
FiOut1PipeScript := stack(FiOutPipe1a, FiOutPipe1b)
# Outlet 1 Fittings
FiExChanCoupling1 := CouplingSUBF(FiExitCoupling1_Origin, [0; 90]*deg, ND_FiTrunk, PS_Default, ["FiEntExitBoxCon"])
FiOutElbow1a := ElbowF([FiExitCoupling1_Origin[0]; FiExitCoupling1_Origin[1]; Z_FiOutPipe1aEnd], [0; 0; -90]*deg, ND_FiTrunk, PS_Default)
FiOut1FittingScript := stack(FiExChanCoupling1, FiOutElbow1a)
# Outlet 2 Pipes (exit box drain)
Z_FiExitBottom := Z_FiEntranceBottom = 3.47057 m
Z_FiExitDrainOutlet := Z_FiExitBottom - H_FiExitWasteDrop
X_FiExitHorizDrainPipeStart := FiInletChannel_Origin[0] + T_PlantWall - CouplingLength(ND_FiExitWaste) + SocketDepth(ND_FiExitWaste)
X_FiExitHorizDrainPipeEnd := FiExitCoupling3_Origin[0] + ElbowRadius(ND_FiExitWaste)
L_FiOutPipe2a := 2*SocketDepth(ND_FiExitWaste)
FiOutPipe2a := PipeSUBF(FiExitCoupling3_Origin, L_FiOutPipe2a, [0; -90]*deg, ND_FiExitWaste, PS_Default, ["FiEntExitBoxCon"])
FiOut2PipeScript := FiOutPipe2a
FiInletChannel_Origin[0] =  # error
FiExitCoupling3_Origin[0] =  # error
# Oulet 2 Fittings (exit box drain)
FiExChanCoupling2 := CouplingSUBF(FiExitCoupling3_Origin, [0; 90]*deg, ND_FiExitWaste, PS_Default, ["FiEntExitBoxCon"])
FiOutElbow2a := ElbowF([
    FiExitCoupling3_Origin[0] + ElbowRadius(ND_FiExitWaste);
    FiExitCoupling3_Origin[1];
    FiExitCoupling3_Origin[2] - ElbowRadius(ND_FiExitWaste) - 2*SocketDepth(ND_FiExitWaste)
], [90; 0; 270]*deg, ND_FiExitWaste, PS_Default)
FiOut2FittingScript := stack(FiExChanCoupling2, FiOutElbow2a)
# Outlet 3 Pipes
L_FiOut3PipeZ := FiExitCoupling2_Origin[2] - (Fi_Origin[2] + outerradius(ND_FiBwManBranch) + H_FiBottomLayer + ElbowRadius(ND_FiTrunk))
L_FiOut3PipeX := FiExitCoupling2_Origin[0] - ((Fi_Origin[0] + T_FiWall + CouplingLength(ND_FiTrunk) - SocketDepth(ND_FiTrunk)) - ElbowRadius(ND_FiTrunk))
L_FiOut3PipeY := FiExitCoupling0_Origin[1] - FiExitCoupling2_Origin[1] - 2*ElbowRadius(ND_FiTrunk)
FiOut3PipeZ := PipeSUBF([
    FiExitCoupling2_Origin[0];
    FiExitCoupling2_Origin[1];
    Fi_Origin[2] + outerradius(ND_FiBwManBranch) + H_FiBottomLayer + ElbowRadius(ND_FiTrunk)
], L_FiOut3PipeZ, [0; 90]*deg, ND_FiTrunk, PS_Default, ["FiEntExitBoxCon"])
FiOut3PipeX := PipeF([
    FiExitCoupling2_Origin[0] - ElbowRadius(ND_FiTrunk);
    FiExitCoupling0_Origin[1];
    Fi_Origin[2] + outerradius(ND_FiBwManBranch) + H_FiBottomLayer
], L_FiOut3PipeX, [0; 0]*deg, ND_FiTrunk, PS_Default)
FiOut3PipeY := PipeF([
    FiExitCoupling2_Origin[0];
    FiExitCoupling2_Origin[1] + ElbowRadius(ND_FiTrunk);
    Fi_Origin[2] + outerradius(ND_FiBwManBranch) + H_FiBottomLayer
], L_FiOut3PipeY, [270; 0]*deg, ND_FiTrunk, PS_Default)
FiOut3PipeScript := stack(FiOut3PipeZ, FiOut3PipeX, FiOut3PipeY)
# Outlet 3 Fittings
FiExChanCoupling3 := CouplingSUBF(FiExitCoupling2_Origin, [0; 90]*deg, ND_FiTrunk, PS_Default, ["FiEntExitBoxCon"])
FiOut3ElbowYZ := ElbowF([
    FiExitCoupling2_Origin[0];
    FiExitCoupling2_Origin[1] + ElbowRadius(ND_FiTrunk);
    Fi_Origin[2] + outerradius(ND_FiBwManBranch) + H_FiBottomLayer
], [180; 270; 0]*deg, ND_FiTrunk, PS_Default)
FiOut3ElbowXY := ElbowF([
    FiExitCoupling2_Origin[0];
    FiExitCoupling0_Origin[1] - ElbowRadius(ND_FiTrunk);
    Fi_Origin[2] + outerradius(ND_FiBwManBranch) + H_FiBottomLayer
], [0; 0; 0]*deg, ND_FiTrunk, PS_Default)
FiOut3FittingScript := stack(FiExChanCoupling3, FiOut3ElbowYZ, FiOut3ElbowXY)
# Inlet/Outlet Stubs
FiRemovableLayer := layer_new("FiRemovablePlu", red)
ZW_FiEntranceCleanForward := ZW_FiEntranceTerminal - HL_FiDirty = 3.90387 m
Z_FiExitStub := ZW_FiEntranceCleanForward - HL_FiPathCleanAve - HL_FiOutletStubs = 3.73617 m
L_FiEntPipeStub := Z_FiEntranceStub - Z_FiEntranceBottom + SocketDepth(ND_FiTrunk)
L_FiExitPipeStub := Z_FiExitStub - Z_FiExitBottom + SocketDepth(ND_FiTrunk)
H_FiExit := H_FiEntrance = 1.07492 m
L_ExitBoxDrainStub := H_FiExit + SocketDepth(ND_FiExitWaste)
FiEnt1PipeStub := PipeF(FiInletCoupling1_Origin + [0 m; 0 m; CouplingLength(ND_FiTrunk) - 2*SocketDepth(ND_FiTrunk)], L_FiEntPipeStub, [0; 90]*deg, ND_FiTrunk, PS_Default)
FiEnt2PipeStub := PipeF(FiInletCoupling2_Origin + [0 m; 0 m; CouplingLength(ND_FiTrunk) - 2*SocketDepth(ND_FiTrunk)], L_FiEntPipeStub, [0; 90]*deg, ND_FiTrunk, PS_Default)
FiEnt3PipeStub := PipeF(FiInletCoupling3_Origin + [0 m; 0 m; CouplingLength(ND_FiTrunk) - 2*SocketDepth(ND_FiTrunk)], L_FiEntPipeStub, [0; 90]*deg, ND_FiTrunk, PS_Default)
FiExit0PipeStub := PipeF(FiExitCoupling0_Origin + [0 m; 0 m; CouplingLength(ND_FiTrunk) - 2*SocketDepth(ND_FiTrunk)], L_FiExitPipeStub, [0; 90]*deg, ND_FiTrunk, PS_Default)
FiExit1PipeStub := PipeF(FiExitCoupling1_Origin + [0 m; 0 m; CouplingLength(ND_FiTrunk) - 2*SocketDepth(ND_FiTrunk)], L_FiExitPipeStub, [0; 90]*deg, ND_FiTrunk, PS_Default)
FiExit2PipeStub := PipeF(FiExitCoupling3_Origin + [0 m; 0 m; CouplingLength(ND_FiExitWaste) - 2*SocketDepth(ND_FiExitWaste)], L_ExitBoxDrainStub, [0; 90]*deg, ND_FiExitWaste, PS_Default)
FiOut3PipeStub := PipeF([
    FiExitCoupling2_Origin[0];
    FiExitCoupling2_Origin[1];
    FiExitCoupling2_Origin[2] + CouplingLength(ND_FiTrunk) - 2*SocketDepth(ND_FiTrunk)
], L_FiExitPipeStub, [0; 90]*deg, ND_FiTrunk, PS_Default)
FiRemovableFrz := FreezeLayer("FiRemovablePlu")
# REAL Script
FiEntExitStubs := stack(FiRemovableLayer, FiEnt1PipeStub, FiEnt2PipeStub, FiEnt3PipeStub, FiExit0PipeStub, FiExit1PipeStub, FiExit2PipeStub, FiOut3PipeStub, FiRemovableFrz)
FiEntExitPipingScript := stack(SelectFiPipeLayer, FiIn0PipeScript, FiIn1PipeScript, FiIn2PipeScript, FiIn3PipeScript, FiOut0PipeScript, FiOut1PipeScript, FiOut2PipeScript, FiOut3PipeScript, LayerFiPipeFrz)
FiEntExitFittingScript := stack(SelectFiFittingLayer, FiIn0FittingScript, FiIn1FittingScript, FiIn2FittingScript, FiIn3FittingScript, FiOut0FittingScript, FiOut1FittingScript, FiOut2FittingScript, FiOut3FittingScript, LayerFiFittingFrz)
FiEntExitPlumbingScript := stack(FiEntExitPipingScript, FiEntExitFittingScript, FiEntExitStubs)
FiAuxScript := stack(FiAuxBoxScript, FiAuxPlumbingScript, FiEntExitPlumbingScript)
# Sand Drain
# this all needs to be updated to a wye at some point
FiSandDrainPipe_Origin := Fi_Origin + [
    -L_Fi + ConRadius(ND_FiSandOutlet);
    W_Fi/2 - ConRadius(ND_FiBwTrunk) - S_Fitting;
    2*ConRadius(ND_FiBwManBranch)
]
L_FiSandDrainPipeVert := H_FiSandOutlet + CapHeight(ND_FiSandOutlet) + B_FiManifoldBranch + T_FiWall + 2*ValveLength(ND_FiSandOutlet)
FiSandDrainPipeLayer := layer_new("FiSandDrainPlu", blue)
DrawFiSandDrainPipeVert := PipeF(FiSandDrainPipe_Origin, L_FiSandDrainPipeVert, [0; 90]*deg, ND_FiSandOutlet, PS_Default)
L_FiSandDrainPipeAngled := sqrt(2)*(2*outerradius(ND_FiSandOutlet) + B_FiManifoldBranch + T_FiWall + 2*ValveLength(ND_FiSandOutlet) - (ValveLength(ND_FiSandOutlet) + ValveSocket(ND_FiSandOutlet))/sqrt(2))
DrawFiSandDrainPipeAngled := PipeSUBF([
    FiSandDrainPipe_Origin[0] - (B_FiManifoldBranch + T_FiWall + 2*ValveLength(ND_FiSandOutlet));
    FiSandDrainPipe_Origin[1];
    Fi_Origin[2] + H_FiSandOutlet - (ValveLength(ND_FiSandOutlet) + ValveSocket(ND_FiSandOutlet))/sqrt(2) + 2*outerradius(ND_FiManBranch)
], L_FiSandDrainPipeAngled, [0; 135]*deg, ND_FiSandOutlet, PS_Default, ["FiTank"])
DrawFiOutletCap := CapF([0; 0; L_FiSandDrainPipeVert] + FiSandDrainPipe_Origin, [0; 270]*deg, ND_FiSandOutlet)
DrawFiSandOutletValve := insertdwg("https://confluence.cornell.edu/download/attachments/173604905/Fi-Scaled-Gate-Valve-Threaded.dwg", [
    FiSandDrainPipe_Origin[0] - (B_FiManifoldBranch + T_FiWall + 2*ValveLength(ND_FiSandOutlet)) - (ValveLength(ND_FiSandOutlet) - ValveSocket(ND_FiSandOutlet))/sqrt(2);
    FiSandDrainPipe_Origin[1];
    Fi_Origin[2] + H_FiSandOutlet - (ValveLength(ND_FiSandOutlet) + ValveSocket(ND_FiSandOutlet))/sqrt(2) + 2*outerradius(ND_FiManBranch) - (ValveLength(ND_FiSandOutlet) - ValveSocket(ND_FiSandOutlet))/sqrt(2)
], 2*outerradius(ND_FiSandOutlet)/(1.16 m), 2*outerradius(ND_FiSandOutlet)/(1.16 m), 0 deg)
RotateFiSandOutletValve1 := Rotate3DLast([
    FiSandDrainPipe_Origin[0] - (B_FiManifoldBranch + T_FiWall + 2*ValveLength(ND_FiSandOutlet)) - (ValveLength(ND_FiSandOutlet) - ValveSocket(ND_FiSandOutlet))/sqrt(2);
    FiSandDrainPipe_Origin[1];
    Fi_Origin[2] + H_FiSandOutlet - (ValveLength(ND_FiSandOutlet) + ValveSocket(ND_FiSandOutlet))/sqrt(2) + 2*outerradius(ND_FiManBranch) - (ValveLength(ND_FiSandOutlet) - ValveSocket(ND_FiSandOutlet))/sqrt(2)
], "z", 180 deg)
RotateFiSandOutletValve2 := Rotate3DLast([
    FiSandDrainPipe_Origin[0] - (B_FiManifoldBranch + T_FiWall + 2*ValveLength(ND_FiSandOutlet)) - (ValveLength(ND_FiSandOutlet) - ValveSocket(ND_FiSandOutlet))/sqrt(2);
    FiSandDrainPipe_Origin[1];
    Fi_Origin[2] + H_FiSandOutlet - (ValveLength(ND_FiSandOutlet) + ValveSocket(ND_FiSandOutlet))/sqrt(2) + 2*outerradius(ND_FiManBranch) - (ValveLength(ND_FiSandOutlet) - ValveSocket(ND_FiSandOutlet))/sqrt(2)
], "y", -45 deg)
FreezeFiSandDrain := FreezeLayer("FiSandDrainPlu")
FiSandDrainScript := stack(FiSandDrainPipeLayer, DrawFiSandDrainPipeVert, DrawFiSandDrainPipeAngled, DrawFiOutletCap, DrawFiSandOutletValve, RotateFiSandOutletValve1, RotateFiSandOutletValve2, FreezeFiSandDrain)
L_FiSiphonPipeBottom := W_PlantDC/2 + FiInletChannel_Origin[0] - (Fi_Origin[0] + T_FiWall + SocketDepth(ND_FiSiphon) + ShortTeeLength(ND_FiSiphon) + ElbowRadius(ND_FiSiphon)) - ElbowRadius(ND_FiSiphon) = 2.75015 m
X_FiSiphonPipe1End := Fi_Origin[0] + T_FiWall - CouplingLength(ND_FiSiphon) + SocketDepth(ND_FiSiphon) - max((T_FiWall - CouplingLength(ND_FiSiphon)) + 2*SocketDepth(ND_FiSiphon), 2*SocketDepth(ND_FiSiphon))
X_FiSiphonManifoldStart := X_FiSiphonPipe1End - ElbowRadius(ND_FiSiphon) - ShortTeeLength(ND_FiSiphon)
X_FiSiphonManifoldEnd := Fi_Origin[0] - L_Fi
# Siphon Fittings Other than Drain Channel Coupling
ZW_FiMax := Z_FiExitStub + HL_FiOutletStubs + HL_FiOutletPlumbingAve + HL_FiTerminal = 427.315 cm
ZW_FiBwSS := Z_FiSiphonOutlet + HL_FiSiphonOrifice + HL_FiSiphonPipe + HL_FiSiphonOutlet = 2.30209 m
Z_FiSiphonCouplingMin := (P_Atm*(ZW_FiMax + ZW_FiBwSS) + Rho_H2O*g*(ZW_FiMax^2 + ZW_FiMax*L_FiSiphonTop - ZW_FiMax*Z_FiSiphonOutlet))/(2*P_Atm + Rho_H2O*g*(L_FiSiphonTop + ZW_FiMax - Z_FiSiphonOutlet)) + outerradius(ND_FiSiphon) = 3.55471 m
Z_FiSiphonCouplingMax := Z_FiExitStub - outerradius(ND_FiSiphon) = 3.59964 m
Z_FiSiphonCouplingMax - Z_FiSiphonCouplingMin =  # error
Z_FiSiphonCoupling := Z_FiSiphonCouplingMax = 3.59964 m
FiSiphonCoupling := CouplingSUBF([
    Fi_Origin[0] + T_FiWall - SocketDepth(ND_FiSiphon);
    Fi_Origin[1] + S_Fitting + ConRadius(ND_FiSiphon);
    Z_FiSiphonCoupling
], [0; 0]*deg, ND_FiSiphon, PS_Default, ["FiTankCon"])
FiSiphonTee := TeeF([
    Fi_Origin[0] - L_Fi/2;
    Fi_Origin[1] + S_Fitting + ConRadius(ND_FiSiphon);
    Z_FiSiphonInlet - outerradius(ND_FiSiphon) + ShortTeeLength(ND_FiSiphon)
], [0; 0; 90]*deg, ND_FiSiphon, PS_Default)
FiSiphonElbow1 := ElbowF([
    Fi_Origin[0] - L_Fi/2 + ElbowRadius(ND_FiSiphon);
    Fi_Origin[1] + S_Fitting + ConRadius(ND_FiSiphon);
    Z_FiSiphonCoupling
], [90; 0; 90]*deg, ND_FiSiphon, PS_Default)
FiSiphonManifoldCap1 := CapF([
    X_FiSiphonManifoldEnd + ConRadius(ND_FiSiphon) - outerradius(ND_FiSiphon);
    Fi_Origin[1] + S_Fitting + ConRadius(ND_FiSiphon);
    Z_FiSiphonInlet - outerradius(ND_FiSiphon)
], [180; 0]*deg, ND_FiSiphon)
FiSiphonManifoldCap2 := CapF([
    Fi_Origin[0] - ConRadius(ND_FiSiphon) + outerradius(ND_FiSiphon);
    Fi_Origin[1] + S_Fitting + ConRadius(ND_FiSiphon);
    Z_FiSiphonInlet - outerradius(ND_FiSiphon)
], [0; 0]*deg, ND_FiSiphon)
FiSiphonTee2 := TeeF([
    Fi_Origin[0] + T_FiWall + SocketDepth(ND_FiSiphon);
    Fi_Origin[1] + S_Fitting + ConRadius(ND_FiSiphon);
    Z_FiSiphonCoupling
], [90; 0; 90]*deg, ND_FiSiphon, PS_Default)
FiSiphonElbow0 := ElbowF([
    Fi_Origin[0] + T_FiWall + SocketDepth(ND_FiSiphon) + ShortTeeLength(ND_FiSiphon) + ElbowRadius(ND_FiSiphon);
    Fi_Origin[1] + S_Fitting + ConRadius(ND_FiSiphon);
    Fi_Origin[2]
], [90; 0; 270]*deg, ND_FiSiphon, PS_Default)
FiSiphonElbow01 := ElbowF([
    Fi_Origin[0] + T_FiWall + SocketDepth(ND_FiSiphon) + ShortTeeLength(ND_FiSiphon) + ElbowRadius(ND_FiSiphon) + L_FiSiphonPipeBottom;
    Fi_Origin[1] + S_Fitting + ConRadius(ND_FiSiphon);
    Fi_Origin[2]
], [270; 0; 90]*deg, ND_FiSiphon, PS_Default)
FiSiphonReducerCyl1 := CylinderF([
    Fi_Origin[0] + T_FiWall + SocketDepth(ND_FiSiphon) + ShortTeeLength(ND_FiSiphon);
    Fi_Origin[1] + S_Fitting + ConRadius(ND_FiSiphon);
    Z_FiSiphonCoupling + ShortTeeLength(ND_FiSiphon)
], outerradius(ND_FiSiphon), SocketDepth(ND_FiSiphon), [0; 90]*deg)
Vol_FiSiphonAir := (CouplingLength(ND_FiSiphon) + 4*outerdiameter(ND_FiSiphon) + 2*(Z_FiSiphonCoupling - Z_FiSiphonOutlet))*π/4*innerdiameter(ND_FiSiphon, PS_Default)^2 = 222.927 L
HL_FiSiphonValveWater := (Z_FiSiphonCoupling - ND_FiSiphon/2) - (Z_FiSiphonOutlet + HL_FiSiphonPipe + HL_FiSiphonOutlet) = 1.2997 m
Q_FiSiphonAir := Vol_FiSiphonAir/Ti_FiSiphonBreak = 22.2927 L/s
HL_FiSiphonValveAir := HL_FiSiphonValveWater*Rho_H2O/Rho_Air = 1079.49 m
L_FiSiphonBreak := Z_FiBottom + H_Fi - Z_FiSiphonCoupling = 0.945853 m
ND_FiSiphonAirValve := NominalPipeSize(D_PipeTotal(Q_FiSiphonAir, HL_FiSiphonValveAir, L_FiSiphonBreak, Nu_Air, E_Pvc, K_FiSiphonValve)) = 1 in
FiSiphonReducerCyl2 := CylinderF([
    Fi_Origin[0] + T_FiWall + SocketDepth(ND_FiSiphon) + ShortTeeLength(ND_FiSiphon);
    Fi_Origin[1] + S_Fitting + ConRadius(ND_FiSiphon);
    Z_FiSiphonCoupling + ShortTeeLength(ND_FiSiphon)
], outerradius(ND_FiSiphonAirValve), SocketDepth(ND_FiSiphon), [0; 90]*deg)
FiSiphonReducerSubtract := SubtractF(["FiFittingsPlu"], "DeleteMe")
SelectFiValveLayer := SelectLayer("FiValvePlu")
FiSiphonAirValve := insertdwg("https://confluence.cornell.edu/download/attachments/173604905/FiMetalBallValve.dwg", [
    Fi_Origin[0] + T_FiWall + SocketDepth(ND_FiSiphon) + ShortTeeLength(ND_FiSiphon);
    Fi_Origin[1] + S_Fitting + ConRadius(ND_FiSiphon);
    Z_FiSiphonCoupling + ShortTeeLength(ND_FiSiphon) + SocketDepth(ND_FiSiphon)
], 2*outerradius(ND_FiSiphonAirValve)*1/(125 in), 2*outerradius(ND_FiSiphonAirValve)*1/(125 in), 0 deg)
FiSiphonAirValveReducer := stack(FiSiphonReducerCyl1, LayerFiFittingFrz, FiSiphonReducerCyl2, GroupDelete, FiSiphonReducerSubtract)
SelectFiFerncos := SelectLayer("FiFerncoCouplingsPlu")
FiSiphonFernco := FerncoCouplingF([Fi_Origin[0]; Fi_Origin[1] + S_Fitting + ConRadius(ND_FiSiphon); Z_FiSiphonCoupling], [0; 0; 0]*deg, ND_FiSiphon, L_FiManFerncoCoupling)
FiSiphonFittingScript := stack(SelectFiFittingLayer, FiSiphonCoupling, FiSiphonTee, FiSiphonElbow1, FiSiphonManifoldCap1, FiSiphonManifoldCap2, FiSiphonTee2, FiSiphonElbow0, FiSiphonElbow01, FiSiphonAirValveReducer, SelectFiValveLayer, FiSiphonAirValve, LayerFiValveFrz, SelectFiFerncos, FiSiphonFernco, LayerFiFerncoFreeze)
# Siphon Pipes Up Until Drain Channel
L_FiSiphonManifold := L_Fi/2 - ShortTeeLength(ND_FiSiphon) - ConRadius(ND_FiSiphon) + outerradius(ND_FiSiphon) = 0.511803 m
L_FiSiphonPipe1a := T_FiWall - CouplingLength(ND_FiSiphon) + SocketDepth(ND_FiSiphon) + L_FiManFerncoCoupling/2 - zc/2 = 0.1318 m
L_FiSiphonPipe1b := L_Fi/2 - ElbowRadius(ND_FiSiphon) - L_FiManFerncoCoupling/2 - zc/2 = 0.335196 m
L_FiSiphonPipe2 := Z_FiSiphonCoupling - ElbowRadius(ND_FiSiphon) - (Z_FiSiphonInlet - outerradius(ND_FiSiphon) + ShortTeeLength(ND_FiSiphon)) = 1.24819 m
L_FiSiphonPipe3 := 2*SocketDepth(ND_FiSiphon)
L_FiSiphonPipe4 := Z_FiSiphonCoupling - ElbowRadius(ND_FiSiphon) - ShortTeeLength(ND_FiSiphon) - Fi_Origin[2]
FiSiphonPipe1a := PipeSUBF([
    Fi_Origin[0] + T_FiWall - CouplingLength(ND_FiSiphon) + SocketDepth(ND_FiSiphon);
    Fi_Origin[1] + S_Fitting + ConRadius(ND_FiSiphon);
    Z_FiSiphonCoupling
], L_FiSiphonPipe1a, [0; 0]*deg, ND_FiSiphon, PS_Default, ["FiTankCon"])
FiSiphonPipe1b := PipeF([
    Fi_Origin[0] - L_FiManFerncoCoupling/2 - zc/2;
    Fi_Origin[1] + S_Fitting + ConRadius(ND_FiSiphon);
    Z_FiSiphonCoupling
], L_FiSiphonPipe1b, [0; 0]*deg, ND_FiSiphon, PS_Default)
FiSiphonPipe2 := PipeF([
    Fi_Origin[0] - L_Fi/2;
    Fi_Origin[1] + S_Fitting + ConRadius(ND_FiSiphon);
    Z_FiSiphonCoupling - ElbowRadius(ND_FiSiphon)
], L_FiSiphonPipe2, [0; -90]*deg, ND_FiSiphon, PS_Default)
FiSiphonManifold1 := PipeF([
    Fi_Origin[0] - L_Fi/2 - ShortTeeLength(ND_FiSiphon);
    Fi_Origin[1] + S_Fitting + ConRadius(ND_FiSiphon);
    Z_FiSiphonInlet - outerradius(ND_FiSiphon)
], L_Fi/2 - ShortTeeLength(ND_FiSiphon) - ConRadius(ND_FiSiphon) + outerradius(ND_FiSiphon), [0; 0]*deg, ND_FiSiphon, PS_Default)
FiSiphonManifold2 := PipeF([
    Fi_Origin[0] - ConRadius(ND_FiSiphon) + outerradius(ND_FiSiphon);
    Fi_Origin[1] + S_Fitting + ConRadius(ND_FiSiphon);
    Z_FiSiphonInlet - outerradius(ND_FiSiphon)
], L_Fi/2 - ShortTeeLength(ND_FiSiphon) - ConRadius(ND_FiSiphon) + outerradius(ND_FiSiphon), [0; 0]*deg, ND_FiSiphon, PS_Default)
FiSiphonPipe3 := PipeF([
    Fi_Origin[0] + T_FiWall - SocketDepth(ND_FiSiphon);
    Fi_Origin[1] + S_Fitting + ConRadius(ND_FiSiphon);
    Z_FiSiphonCoupling
], L_FiSiphonPipe3, [180; 0]*deg, ND_FiSiphon, PS_Default)
FiSiphonPipe4 := PipeF([
    Fi_Origin[0] + T_FiWall + SocketDepth(ND_FiSiphon) + ShortTeeLength(ND_FiSiphon);
    Fi_Origin[1] + S_Fitting + ConRadius(ND_FiSiphon);
    Z_FiSiphonCoupling - ShortTeeLength(ND_FiSiphon)
], L_FiSiphonPipe4, [0; -90]*deg, ND_FiSiphon, PS_Default)
FiSiphonPipe5 := PipeF([
    Fi_Origin[0] + T_FiWall + SocketDepth(ND_FiSiphon) + ShortTeeLength(ND_FiSiphon) + ElbowRadius(ND_FiSiphon) + L_FiSiphonPipeBottom;
    Fi_Origin[1] + S_Fitting + ConRadius(ND_FiSiphon);
    Fi_Origin[2]
], L_FiSiphonPipeBottom, [0; 0], ND_FiSiphon, PS_Default)
FiSiphonPipeScript := stack(SelectFiPipeLayer, FiSiphonPipe1a, FiSiphonPipe1b, FiSiphonPipe2, FiSiphonManifold1, FiSiphonManifold2, FiSiphonPipe3, FiSiphonPipe4, FiSiphonPipe5, LayerFiPipeFrz)
# Siphon Manifold Orifices
FirstFiSiphonManOrifice := CylinderF([
    Fi_Origin[0] - B_FiSiphonManOrifices/2 - ConRadius(ND_FiSiphon) + outerradius(ND_FiSiphon);
    Fi_Origin[1] + S_Fitting + ConRadius(ND_FiSiphon);
    Z_FiSiphonInlet - outerradius(ND_FiSiphon)
], D_FiSiphonManOrifices/2, 1.2*ConRadius(ND_FiSiphon), [0; 90]*deg)
ArrayFiSiphonManOrifices := array_all(1, N_FiSiphonManOrifices/2, -B_FiSiphonManOrifices)
MirrorFiSiphonManOrifices := Mirror3dAll("yz", [Fi_Origin[0] - L_Fi/2; 0 m], "n")
FiSiphonOrifices := stack(FirstFiSiphonManOrifice, ArrayFiSiphonManOrifices, MirrorFiSiphonManOrifices)
SubtractFiSiphonOrificesPipe := SubtractF(["FiPipePlu"], "DeleteMe")
SubtractFiSiphonOrificesCaps := SubtractF(["FiFittingsPlu"], "DeleteMe")
FiSiphonManOrificeScript := stack(FiSiphonOrifices, GroupDelete, SubtractFiSiphonOrificesPipe, FiSiphonOrifices, GroupDelete, SubtractFiSiphonOrificesCaps)
FiSiphonScript := stack(FiSiphonFittingScript, FiSiphonPipeScript, FiSiphonManOrificeScript)
# Backwash Siphon
# Array the Filter and Union Concrete
ThawFilter := ThawMultiple(["Fi*"])
FiArray1Frz := ["FiAuxPipePlu"; "FiAuxFittingPlu"; "FiAuxRemovablePlu"; "FiDistPipePlu"; "FiDistFittingPlu"; "FiOverflowDistBoxCon"; "FiInletChannelCon"; "FiInletFittingsPlu"; "FiInletPipePlu"]
FreezeFiPieces := FreezeMultiple(FiArray1Frz)
ArrayFi1 := Array_All(N_Fi, 1, -(W_Fi + T_FiWall))
FreezeFi := FreezeMultiple(["Fi*"])
FiArray2Thw := ["FiAuxPipePlu"; "FiAuxFittingPlu"; "FiAuxRemovablePlu"; "FiDistPipePlu"; "FiDistFittingPlu"; "FiOverflowDistBoxCon"]
ThawFiPieces := ThawMultiple(FiArray2Thw)
ArrayFi2 := Array_All(N_Fi - (N_Fi > 1), 1, -(W_FiEntrance + 2*T_PlantWall + W_FiOverflow))
ThawFilterConcrete := ThawMultiple(["Fi*Con"])
RenameFilterConcrete :=
    RenameLayer("FiEntExitBoxCon", "FiCon") if N_Fi == 2
    RenameLayer("FiOverflowDistBoxCon", "FiCon") otherwise
GroupFilterConcrete := GroupAll("FiCon")
FiArrayScript :=
    stack(ThawFilterConcrete, Union_All, RenameFilterConcrete, GroupFilterConcrete, FreezeFi) if N_Fi == 1
    stack(ThawFilter, FreezeFiPieces, ArrayFi1, FreezeFi, ThawFiPieces, ArrayFi2, FreezeFi, ThawFilterConcrete, Union_All, RenameFilterConcrete, GroupFilterConcrete, FreezeFi) otherwise
# Overflow, Inlet and Distribution Weirs
FiEntWeir := BoxF([FiEntranceBox_Origin[0]; FiEntranceBox_Origin[1]; Z_FiEntranceWeir], [FiEntranceBox_Origin[0] + T_PlantWall; FiEntranceBox_Origin[1] + W_FiEntrance; Z_FiTop], [0; 0; 0]*deg)
ArrayFiEntWeir := ArrayLast(N_Fi, 1, -(2*T_PlantWall + W_FiEntrance + W_FiOverflow))
FiOverflowWeirs := BoxF([FiEntranceBox_Origin[0] - L_FiEntrance; FiEntranceBox_Origin[1]; Z_FiOverflowWeir], [
    FiEntranceBox_Origin[0] - L_FiEntrance + L_FiOverflowWeir;
    FiEntranceBox_Origin[1] - T_PlantWall - (N_Fi > 1)*(N_Fi - 1)*(W_FiOverflow + T_PlantWall) - (N_Fi > 2)*(N_Fi - 2)*(W_FiEntrance + T_PlantWall);
    Z_FiTop
], [0; 0; 0]*deg)
FiDistBarrierCut := BoxF(FiExitBox_Origin + [0 m; 0 m; H_FiExit], FiExitBox_Origin + [
    -L_FiExit;
    -T_PlantWall - (N_Fi > 1)*(N_Fi - 1)*(W_FiOverflow + T_PlantWall) - (N_Fi > 2)*(N_Fi - 2)*(W_FiEntrance + T_PlantWall);
    H_FiDistBarrier
], [0; 0; 0]*deg)
FiEntranceBox_Origin[2] =  # error
FiSubtractWeirs := SubtractF(["FiCon"], "DeleteMe")
NewWeirStack := stack(FiEntWeir, ArrayFiEntWeir, FiOverflowWeirs, FiDistBarrierCut)
# [component: inputs NewWeirStack]
Z_FiOverflowWeir =  # error
FiWeirScript := stack(FiEntWeir, ArrayFiEntWeir, FiOverflowWeirs, FiDistBarrierCut, GroupDelete, FiSubtractWeirs)
# Finish Distribution Plumbing
SelectDistFittingLayer := SelectLayer("FiDistFittingPlu")
# change z coordinate
FiDistElbow2 := ElbowF([
    min(FiExitBox_Origin[0] - L_FiExit/2 - ElbowRadius(ND_DistPipe) - 2*SocketDepth(ND_DistPipe), FiExitBox_Origin[0] - L_FiExit - T_PlantWall);
    FiEntranceBox_Origin[1] - T_PlantWall - W_FiOverflow/2;
    FiDistBox_Origin[2] - CouplingLength(ND_DistPipe) + SocketDepth(ND_DistPipe) - L_FiDistPipe1 - ElbowRadius(ND_DistPipe)
], [90; 0; 0]*deg, ND_DistPipe, PS_Default)
FiDistTee := TeeF([
    min(FiExitBox_Origin[0] - L_FiExit/2 - ElbowRadius(ND_DistPipe) - 2*SocketDepth(ND_DistPipe), FiExitBox_Origin[0] - L_FiExit - T_PlantWall) - ElbowRadius(ND_DistPipe) + ShortTeeLength(ND_DistPipe);
    FiEntranceBox_Origin[1] - W_FiEntrance - 3*T_PlantWall - 3/2*W_FiOverflow;
    FiDistBox_Origin[2] - CouplingLength(ND_DistPipe) + SocketDepth(ND_DistPipe) - L_FiDistPipe1 - ElbowRadius(ND_DistPipe)
], [270; 0; 0]*deg, ND_DistPipe, PS_Default)
ArrayFiDist := ArrayLast(N_Fi - 2, 1, -(W_FiEntrance + W_FiOverflow + 2*T_PlantWall))
FiDistFinishFittingScript :=
    stack(SelectDistFittingLayer, FiDistElbow2, FiDistFittingFrz) if N_Fi ≤ 2
    stack(SelectDistFittingLayer, FiDistElbow2, FiDistTee, ArrayFiDist, FiDistFittingFrz) otherwise
SelectDistPipeLayer := SelectLayer("FiDistPipePlu")
L_FiDistPipe2 := max(L_FiExit/2 - ElbowRadius(ND_DistPipe) + T_PlantWall, 2*SocketDepth(ND_DistPipe))
L_FiDistPipe3 := W_FiOverflow + W_FiEntrance + 2*T_PlantWall - ElbowRadius(ND_DistPipe) - TeeLength(ND_DistPipe)/2
L_FiDistPipe4 := max(L_FiExit/2 - ElbowRadius(ND_DistPipe) + T_PlantWall, 2*SocketDepth(ND_DistPipe)) + ElbowRadius(ND_DistPipe) - ShortTeeLength(ND_DistPipe)
L_FiDistPipe5 := W_FiOverflow + W_FiEntrance + 2*T_PlantWall - TeeLength(ND_DistPipe)
FiDistPipe2 := PipeF([
    FiExitBox_Origin[0] - L_FiExit/2 - ElbowRadius(ND_DistPipe);
    FiEntranceBox_Origin[1] - T_PlantWall - W_FiOverflow/2;
    FiDistBox_Origin[2] - CouplingLength(ND_DistPipe) + SocketDepth(ND_DistPipe) - L_FiDistPipe1 - ElbowRadius(ND_DistPipe)
], L_FiDistPipe2, [0; 0; 0]*deg, ND_DistPipe, PS_Default)
FiDistPipe3 := PipeF([
    min(FiExitBox_Origin[0] - L_FiExit/2 - ElbowRadius(ND_DistPipe) - 2*SocketDepth(ND_DistPipe), FiExitBox_Origin[0] - L_FiExit - T_PlantWall) - ElbowRadius(ND_DistPipe);
    FiEntranceBox_Origin[1] - T_PlantWall - W_FiOverflow/2 - ElbowRadius(ND_DistPipe);
    FiDistBox_Origin[2] - CouplingLength(ND_DistPipe) + SocketDepth(ND_DistPipe) - L_FiDistPipe1 - ElbowRadius(ND_DistPipe)
], L_FiDistPipe3, [90; 0; 0]*deg, ND_DistPipe, PS_Default)
FiDistPipe4 := PipeF([
    FiExitBox_Origin[0] - L_FiExit/2 - ElbowRadius(ND_DistPipe);
    FiEntranceBox_Origin[1] - W_FiEntrance - 3*T_PlantWall - 3/2*W_FiOverflow;
    FiDistBox_Origin[2] - CouplingLength(ND_DistPipe) + SocketDepth(ND_DistPipe) - L_FiDistPipe1 - ElbowRadius(ND_DistPipe)
], L_FiDistPipe4, [0; 0; 0]*deg, ND_DistPipe, PS_Default)
FiDistPipe5 := PipeF([
    min(FiExitBox_Origin[0] - L_FiExit/2 - ElbowRadius(ND_DistPipe) - 2*SocketDepth(ND_DistPipe), FiExitBox_Origin[0] - L_FiExit - T_PlantWall) - ElbowRadius(ND_DistPipe);
    FiEntranceBox_Origin[1] - W_FiEntrance - 3*T_PlantWall - 3/2*W_FiOverflow - TeeLength(ND_DistPipe)/2;
    FiDistBox_Origin[2] - CouplingLength(ND_DistPipe) + SocketDepth(ND_DistPipe) - L_FiDistPipe1 - ElbowRadius(ND_DistPipe)
], L_FiDistPipe5, [90; 0; 0]*deg, ND_DistPipe, PS_Default)
FiDistFinishPipeScript :=
    stack(SelectDistPipeLayer, FiDistPipe2, FiDistPipe3, FiDistPipeFrz) if N_Fi ≤ 2
    stack(SelectDistPipeLayer, FiDistPipe2, FiDistPipe3, FiDistPipe4, ArrayFiDist, FiDistPipe5, ArrayFiDist, FiDistPipeFrz) otherwise
FiDistFinishScript := stack(FiDistFinishFittingScript, FiDistFinishPipeScript)
# Finish Siphon Plumbing
# Channel Coupling
Q_TankDrainMax := Q_pipeminor(innerdiameter(ND_EtDrain, PS_Default), H_Et, K_PipeEnt + K_PipeExit)*(N_EtFullHopper + 1) + Q_pipeminor(innerdiameter(ND_FlocValve, PS_Default), H_Floc, K_PipeEnt + K_PipeExit)*(last(Y_FlocDrainValves) + 1) + Q_pipeminor(innerdiameter(ND_SedSludgePipe, PS_Default), H_Sed, K_PipeEnt + K_PipeExit)*N_SedBays*N_SedTanks
Q_PlantDCMax := Q_TankDrainMax + N_Fi*(1 + N_Fi > 1)*Q_Fi
L_PlantDC := T_PlantWall + N_SedTanks*(W_Sed + T_PlantWall) + N_FlocChannels*(W_FlocChannel + T_PlantWall) + W_EtWalkway + T_PlantWall + W_Et
H_PlantDC := H_HorizChannelMin(Q_PlantDCMax, W_PlantDC, L_PlantDC, Nu_Water, E_Concrete, 1)
FiSiphonChannelCoupling_Origin := [
    Fi_Origin[0] + T_FiWall + SocketDepth(ND_FiSiphon) + ShortTeeLength(ND_FiSiphon) + 2*ElbowRadius(ND_FiSiphon) + L_FiSiphonPipeBottom;
    Fi_Origin[1] + S_Fitting + ConRadius(ND_FiSiphon);
    PlantLowerDC_Origin[2] - H_PlantDC - Slope_PlantDC*(L_PlantLowerDC - (T_PlantWall + Fi_origin[1] + S_Fitting + 2*ConRadius(ND_FiSiphon))) - SocketDepth(ND_FiSiphon)
]
FiSiphonChannelCoupling(N) := CouplingSUBF(FiSiphonChannelCoupling_Origin + (N - 1)*[0 m; -W_Fi - T_FiWall; -Slope_PlantDC*(W_Fi + T_FiWall)], [0; 270]*deg, ND_FiSiphon, PS_Default, ["DrainChannelCon"])
FiSiphonChannelCouplingScript :=
    N ← 1
    Local ← stack(SelectFiFittingLayer, FiSiphonChannelCoupling(N))
    while N_Fi > N
        N ← N + 1
        Local ← stack(Local, FiSiphonChannelCoupling(N))
    Local ← stack(Local, LayerFiFittingFrz)
    return Local
# Pipe Beneath Drain Channel
FiSiphonChannelPipe_Origin := [
    Fi_Origin[0] + T_FiWall + SocketDepth(ND_FiSiphon) + ShortTeeLength(ND_FiSiphon) + 2*ElbowRadius(ND_FiSiphon) + L_FiSiphonPipeBottom;
    Fi_Origin[1] + S_Fitting + ConRadius(ND_FiSiphon);
    Fi_Origin[2] + ElbowRadius(ND_FiSiphon)
]
L_FiSiphonChannelPipe1 := FiSiphonChannelCoupling_Origin[2] - CouplingLength(ND_FiSiphon) + 2*SocketDepth(ND_FiSiphon) - (Z_FiBottom + ElbowRadius(ND_FiSiphon))
FiSiphonChannelPipe(N) := PipeSUBF(FiSiphonChannelPipe_Origin + (N - 1)*[0 m; -W_Fi - T_FiWall; 0 m], L_FiSiphonChannelPipe1 - (N - 1)*Slope_PlantDC*(W_Fi + T_FiWall), [0; 90]*deg, ND_FiSiphon, PS_Default, ["DrainChannelCon"])
FiSiphonChannelPipeScript :=
    N ← 1
    Local ← stack(SelectFiPipeLayer, FiSiphonChannelPipe(N))
    while N_Fi > N
        N ← N + 1
        Local ← stack(Local, FiSiphonChannelPipe(N))
    return Local
# Drain Channel Stub
L_FiSiphonChannelStub := Z_FiSiphonOutlet - FiSiphonChannelCoupling_Origin[2]
FiSiphonChannelStub(N) := PipeF(FiSiphonChannelCoupling_Origin + (N - 1)*[0 m; -W_Fi - T_FiWall; -Slope_PlantDC*(W_Fi + T_FiWall)], L_FiSiphonChannelStub + (N - 1)*Slope_PlantDC*(W_Fi + T_FiWall), [0; 90; 0]*deg, ND_FiSiphon, PS_Default)
FiSiphonChannelStubScript :=
    N ← 1
    Local ← FiSiphonChannelStub(N)
    while N_Fi > N
        N ← N + 1
        Local ← stack(Local, FiSiphonChannelStub(N))
    Local ← stack(Local, LayerFiPipeFrz)
    return Local
FiSiphonFinishScript := stack(FiSiphonChannelCouplingScript, FiSiphonChannelPipeScript, FiSiphonChannelStubScript)
# Overflow Box Drain Couplings and Elbow
FiOverflowDrainElbow(N) := ElbowSUBF([
    X_FiOverflowHorizDrainPipeEnd - ElbowRadius(ND_FiEntOverflow);
    FiEntranceBox_Origin[1] - T_PlantWall - W_FiOverflow/2 - (N - 1)*(W_Fi + T_FiWall);
    Z_FiOverflowVertDrainPipeEnd
], [180; 0; 90]*deg, ND_FiEntOverflow, PS_Default, ["FiCon"])
FiOverflowDrainElbowScript :=
    N ← 1
    Local ← stack(SelectFiFittingLayer, FiOverflowDrainElbow(N))
    while N_Fi - 1 > N
        N ← N + 1
        Local ← stack(Local, FiOverflowDrainElbow(N))
    return Local
FiOverflowDrainCouplingHoriz(N) := CouplingSUBF([
    FiInletChannel_Origin[0] + T_PlantWall - SocketDepth(ND_FiEntOverflow);
    FiEntranceBox_Origin[1] - T_PlantWall - W_FiOverflow/2 - (N - 1)*(W_Fi + T_FiWall);
    Z_FiOverflowVertDrainPipeEnd - ElbowRadius(ND_FiEntOverflow)
], [0; 0], ND_FiEntOverflow, PS_Default, ["DrainChannelCon"])
FiOverflowCouplingFinishScript :=
    N ← 1
    Local ← stack(FiOverflowDrainElbowScript, FiOverflowDrainCouplingHoriz(N))
    while N_Fi - 1 > N
        N ← N + 1
        Local ← stack(Local, FiOverflowDrainCouplingHoriz(N))
    Local ← stack(Local, LayerFiFittingFrz)
    return Local
# Overflow Box Drain Horizontal Pipes
L_FiExitDrainPipeHoriz := X_FiExitHorizDrainPipeStart - X_FiExitHorizDrainPipeEnd
L_FiOverflowDrainPipeHoriz := (FiInletChannel_Origin[0] + T_PlantWall) + SocketDepth(ND_FiEntOverflow) - X_FiOverflowHorizDrainPipeEnd - CouplingLength(ND_FiEntOverflow) = 0.773676 m
FiOverflowDrainPipeHoriz(N) := PipeSUBF([
    X_FiOverflowHorizDrainPipeEnd;
    FiEntranceBox_Origin[1] - T_PlantWall - W_FiOverflow/2 - (N - 1)*(W_Fi + T_FiWall);
    Z_FiOverflowVertDrainPipeEnd - ElbowRadius(ND_FiEntOverflow)
], L_FiOverflowDrainPipeHoriz, [0; 180]*deg, ND_FiEntOverflow, PS_Default, ["DrainChannelCon"])
FiOverflowPipeFinishScript :=
    N ← 1
    Local ← stack(SelectFiPipeLayer, FiOverflowDrainPipeHoriz(N))
    while N_Fi - 1 > N
        N ← N + 1
        Local ← stack(Local, FiOverflowDrainPipeHoriz(N))
    Local ← stack(Local, LayerFiPipeFrz)
    return Local
L_FiExitDrainPipeHoriz =  # error
X_FiExitHorizDrainPipeStart =  # error
X_FiExitHorizDrainPipeEnd =  # error
# Exit Box Drain Couplings
FiExitDrainChanCoupling(N) := CouplingSUBF([
    FiInletChannel_Origin[0] + T_PlantWall - SocketDepth(ND_FiExitWaste);
    FiExitCoupling3_Origin[1] - (N - 1)*(W_Fi + T_FiWall);
    FiExitCoupling3_Origin[2] - ElbowRadius(ND_FiExitWaste) - 2*SocketDepth(ND_FiExitWaste)
], [0; 0], ND_FiExitWaste, PS_Default, ["DrainChannelCon"])
FiExitHorizDrainCouplingScript :=
    N ← 1
    Local ← stack(SelectFiFittingLayer, FiExitDrainChanCoupling(N))
    while N_Fi > N
        N ← N + 1
        Local ← stack(Local, FiExitDrainChanCoupling(N))
    Local ← stack(Local, LayerFiFittingFrz)
    return Local
# Exit Box Drain Horizontal Pipes
FiExitDrainPipeHoriz(N) := PipeSUBF([
    X_FiExitHorizDrainPipeStart;
    FiExitCoupling3_Origin[1] - (N - 1)*(W_Fi + T_FiWall);
    FiExitCoupling3_Origin[2] - ElbowRadius(ND_FiExitWaste) - 2*SocketDepth(ND_FiExitWaste)
], L_FiExitDrainPipeHoriz, [0; 0], ND_FiExitWaste, PS_Default, ["DrainChannelCon"])
FiExitHorizDrainPipeScript :=
    N ← 1
    Local ← stack(SelectFiPipeLayer, FiExitDrainPipeHoriz(N))
    while N_Fi > N
        N ← N + 1
        Local ← stack(Local, FiExitDrainPipeHoriz(N))
    Local ← stack(Local, LayerFiPipeFrz)
    return Local
FiBoxDrainFinishScript := stack(FiOverflowCouplingFinishScript, FiOverflowPipeFinishScript, FiExitHorizDrainCouplingScript, FiExitHorizDrainPipeScript)
# Finish Box Drain Plumbing
FiWaterLayer := layer_new("FiWater", blue2)
Water_FiInletChannel := BoxF(FiInletChannel_Origin, FiInletChannel_Origin + [-W_FiInletChannel; L_FiInletChannel; ZW_FiInletChannel - FiInletChannel_Origin[2]], [0; 0; 0]*deg)
Water_FiEntranceBoxTerminal := BoxF(FiEntranceBox_Origin, FiEntranceBox_Origin + [-L_FiEntrance; W_FiEntrance; ZW_FiEntranceTerminal - FiEntranceBox_Origin[2]], [0; 0; 0]*deg)
Water_FiBoxTerminal := BoxF(Fi_Origin, Fi_Origin + [-L_Fi; W_Fi; ZW_FiMax - Z_FiBottom], [0; 0; 0]*deg)
Water_FiEntranceBoxClean := BoxF(FiEntranceBox_Origin, FiEntranceBox_Origin + [-L_FiEntrance; W_FiEntrance; ZW_FiEntranceCleanForward - FiEntranceBox_Origin[2]], [0; 0; 0]*deg)
ZW_FiClean := Z_FiExitStub + HL_FiOutletStubs + HL_FiOutletPlumbingAve + HL_FiCleanLayer = 387.315 cm
Water_FiBoxClean := BoxF(Fi_Origin, Fi_Origin + [-L_Fi; W_Fi; ZW_FiClean - Z_FiBottom], [0; 0; 0]*deg)
Water_FiEntranceBoxBw := BoxF(FiEntranceBox_Origin, FiEntranceBox_Origin + [-L_FiEntrance; W_FiEntrance; ZW_FiEntranceBwSS - FiEntranceBox_Origin[2]], [0; 0; 0]*deg)
Water_FiBoxBw := BoxF(Fi_Origin, Fi_Origin + [-L_Fi; W_Fi; ZW_FiBwSS - Z_FiBottom], [0; 0; 0]*deg)
FreezeFiWater := FreezeLayer("FiWater")
FiWaterTerminalScript := stack(FiWaterLayer, Water_FiInletChannel, Water_FiEntranceBoxTerminal, Water_FiBoxTerminal, FreezeFiWater)
FiWaterCleanScript := stack(FiWaterLayer, Water_FiInletChannel, Water_FiEntranceBoxClean, Water_FiBoxClean, FreezeFiWater)
FiWaterBwScript := stack(FiWaterLayer, Water_FiInletChannel, Water_FiEntranceBoxBw, Water_FiBoxBw, FreezeFiWater)
FiSandLayer := layer_new("FiSand", yellow)
Sand_FiBoxForward := BoxF(Fi_Origin, Fi_Origin + [-L_Fi; W_Fi; H_FiSand], [0; 0; 0]*deg)
Sand_FiBoxBw := BoxF(Fi_Origin, Fi_Origin + [-L_Fi; W_Fi; H_FiFluidizedBed], [0; 0; 0]*deg)
FreezeFiSand := FreezeLayer("FiSand")
FiSandForwardScript := stack(FiSandLayer, Sand_FiBoxForward, FreezeFiSand)
FiSandBwScript := stack(FiSandLayer, Sand_FiBoxBw, FreezeFiSand)
# Adding Boxes to show heights of water and sand
# NEED FiSiphonFinishScript possibly PlantDrainChannelScript??
AC_FilterWaterTerminal := stack(FiInletChannelScript, FiTankScript, FiManifoldScript, FiAuxScript, FiSandDrainScript, FiSiphonScript, FiArrayScript, FiWeirScript, FiDistFinishScript, FiBoxDrainFinishScript, FiWaterTerminalScript, FiSandForwardScript)
AC_FilterWaterClean := stack(FiInletChannelScript, FiTankScript, FiManifoldScript, FiAuxScript, FiSandDrainScript, FiSiphonScript, FiArrayScript, FiWeirScript, FiDistFinishScript, FiBoxDrainFinishScript, FiWaterCleanScript, FiSandForwardScript)
AC_FilterWaterBw := stack(FiInletChannelScript, FiTankScript, FiManifoldScript, FiAuxScript, FiSandDrainScript, FiSiphonScript, FiArrayScript, FiWeirScript, FiDistFinishScript, FiBoxDrainFinishScript, FiWaterBwScript, FiSandBwScript)
AC_FilterWater :=
    AC_FilterWaterTerminal if EN_FilterWater == 0
    AC_FilterWaterClean if EN_FilterWater == 1
    AC_FilterWaterBw if EN_FilterWater == 2
AC_Filter := stack(FiInletChannelScript, FiTankScript, FiManifoldScript, FiAuxScript, FiSandDrainScript, FiSiphonScript, FiArrayScript, FiWeirScript, FiDistFinishScript, FiBoxDrainFinishScript)
AC_Filter :=
    AC_Filter if EN_Water == 0
    AC_FilterWater otherwise
# Previews
# [reference: LayoutsAC.xmcd]
# Display Variables
Q_Plant =  # error
AC_Filter =  # error
# [component: inputs AC_Filter]
AI_Preview = [
    "laythw";
    "LoadPlot";
    "_-view o f";
    "-plot n ";
    "AguaClaraPlot";
    "PublishToWeb PNG.pc3";
    "[FILEPATH]SRSF_Front";
    "n y";
    "_-view o t";
    "-plot n ";
    "AguaClaraPlot";
    "PublishToWeb PNG.pc3";
    "[FILEPATH]SRSF_Top";
    "n y";
    "_-view o r";
    "-plot n ";
    "AguaClaraPlot";
    "PublishToWeb PNG.pc3";
    "[FILEPATH]SRSF_Right";
    "n y";
    "shademode x -view swiso";
    "-plot n ";
    "AguaClaraPlot";
    "PublishToWeb PNG.pc3";
    "[FILEPATH]SRSF_SWIso";
    "n y";
    "shademode 2"
]
