# SRSF Modular Code
# NOTE: this code does not draw the plant drain channel, as the original drawing code for the srsf does!
# User Inputs
Q_Plant := 20*L/s  # To be left undefined and inputed online by the user
method := "SRSF"
Z_FiWaterSource := 1.899 m
HL_FiEntranceWater := .054 m
Z_FiSourceBottom := 1.665 m
# From Expert Inputs
ND_FiEntrancePipe :=
    3 in if Q_Plant ≤ .4*L/s
    (4 in) if Q_Plant ≤ 7*L/s and Q_Plant > 4*L/s
    (6 in) if Q_Plant ≤ 15*L/s and Q_Plant > 7*L/s
    (8 in) if Q_Plant > 15*L/s
# Defined for this modular code to work!
Country := 0
Language := 0
# Tabulated Constants
Rho_FB := 1001*kg/m^3
Rho_H2O := 1000*kg/m^3
E_Concrete := 2 mm
Nu_Water := 1*10^-6*m^2/s  # The kinematic viscosity of water.
E_Pvc := 0.12 mm
Pi_Jet := 0.4
P_Atm := 1 atm
Rho_Air := 1.204*kg/m^3
Nu_Air := 12*mm^2/s
# General Assumptions and  Constants
USD := ¤
Lem := USD/19.06
W_ChannelMin := 15 cm
H_PlantFreeboard := 0.1*m
HL_ChannelMax := 5 cm
W_HumanMin := 0.54 m
T_ConcreteMin := 5 cm
S_Fitting := 5 cm
T_PlantWall := 15 cm
T_ChannelWall := T_PlantWall
EN_DrillSeries := 0
EN_Water := 0
EN_FilterWater := 2
# Linear Flow Orifice Meter
D_DrillEng :=
    i ← 0
    D_DrillEng[0] ← 1/32*in
    while D_DrillEng[i] ≤ 3/16*in - 1/128*in
        i ← i + 1
        D_DrillEng[i] ← D_DrillEng[i - 1] + 1/128*in
    while D_DrillEng[i] < 1 in - 1/16*in
        i ← i + 1
        D_DrillEng[i] ← D_DrillEng[i - 1] + 1/16*in
    while D_DrillEng[i] < 2 in
        i ← i + 1
        D_DrillEng[i] ← D_DrillEng[i - 1] + 1/4*in
    return D_DrillEng
D_DrillMet :=
    i ← 0
    D_DrillMet[0] ← 0.5 mm
    while D_DrillMet[i] ≤ 5 mm - 0.1 mm
        i ← i + 1
        D_DrillMet[i] ← D_DrillMet[i - 1] + 0.1 mm
    while D_DrillMet[i] < 20 mm
        i ← i + 1
        D_DrillMet[i] ← D_DrillMet[i - 1] + 1 mm
    while D_DrillMet[i] < 50 mm
        i ← i + 1
        D_DrillMet[i] ← D_DrillMet[i - 1] + 2 mm
    return D_DrillMet
D_Drill :=
    D_Drill ← D_DrillEng if EN_DrillSeries == 0
    D_Drill ← D_DrillMet otherwise
# Flocculator
ED_Floc := 10.5*mW/kg
# Sedimentation Tank
Pi_QSludgeOrifices := 0.85
B_SedSludgeOrificesEst := 10 cm
HW_SedEst := 2 m
Ti_SludgeDrain := 30 min
L_SedPlateCantilevered := 20 cm
S_SedPlateMin := 2.5 cm
L_SedPlateSheet := 300 cm
AN_SedPlate := 60 deg
AN_SedSlope := 50 deg
Perpendicular_Weir := 0
Parallel_Weir := 1
HL_SedWeirMax := 5 cm
B_SedLaunderOrificesEst := 10 cm
Pi_QLaunderOrifices := 0.80
HL_SedLaunderBod := 4 cm
T_SedPlate := 0.2 cm
T_SedWeir := 4 cm
W_SedPlate := 42 in
W_SedBay := W_SedPlate
ED_SedInlet := ED_Floc
V_SedCBod := 0.12*mm/s
V_SedUpBod := 1*mm/s
H_SedSlopesToFlocWeirMin := 15 cm
H_FlocWeirToLamellaMin := 10 cm
L_SedLaunderCapExcess := 3 cm
# SRSF Inputs
# Construction and Design Inputs
T_FiWall := 25 cm
ND_FiKeyPipe := 1.5 in
# Schedule 40 or Schedule 80 for slotted branches????? Schedule 40 has larger ID and that increases the max flow rate it can handle and thus increases the allowable width of the filter. Schedule 40 for strength and servicability. This changes the dimensions of the filter box and the constraints for the entrance and exit boxes.
PS_FiBranch := 2
# Design guidelines say 11 mm/s. The success of lab-scale backwashing at 10 mm/s suggests that this is a reasonable and conservative value
V_FiBw := 11*mm/s
N_FiLayer := 6
V_FiLayer := V_FiBw/N_FiLayer = 1.83333 mm/s
H_FiLayerMin := 20 cm  # Depth of each filter layer
B_FiManifoldBranch := 10 cm
ND_FiManBranch := 1 in
# We are going to take this pipe size for the slotted pipes as a given. Larger pipes may block too much flow and they are harder to install.
ND_FiBwManBranch := 1.5 in
W_FiManSlots := 0.008 in = 0.2032 mm  # A slot thickness of 0.008 in or 0.2 mm is selected so that sand will not enter the slotted pipes.
B_SlotsAvailable := [1/8*in; 3/16*in; 1/4*in] = [3.175; 4.7625; 6.35] mm  # These are the possible spacings for the slots that our supplier can fabricate
ND_FiBranchHolder := 2 in
ND_FiBwBranchHolder := 2 in
S_FiTrunkMin := 3 cm  # Minimum vertical spacing between trunk line pipes going through the filter wall for concrete construction
S_FiManAssembly := 1 cm
# Space between the ends of the branch receiver pipes and the walls so that the manifold assemblies are easy to lower into the filter boxes (if the branch receivers extended the entire length of the box they would just barely fit and it would be hard to get into place.
L_FiManFerncoCoupling := 4 cm
L_FiManBranchExt := 2 cm  # How far the branch extends into the trunk line
Ti_FiBwInitiationBod := 3 min  # AKA time to drain the filter box of the water above the fluidized bed
HL_FiBwSF := 20 cm  # This is the extra head we are going to provide to ensure that we can initiate backwash.
HL_FiSiphonMax := 20 cm  # Maximum acceptable head loss through the siphon at SS; used to calculate a diameter
ND_FiSandOutlet := 2 in
H_FiDistBarrier := 10 cm
L_FiSiphonChannelStubMin := 20 cm
# Being able to shorten the stub from which the siphon discharges into the main plant drain channel allows for some flexibility in the hydraulic design.
HL_FiEntrancePipeMax := 10 cm
ND_FiTrunkMax := 6 in
W_FiInletChannelMin := 30 cm
# Elevation Safety Margins
H_FiBwNoSuckAir := 20 cm  # Minimum depth in the entrance box during backwash such that there is standing water over the inlet.
H_FiSiphonNoSuckAir := 10 cm  # Minimum depth over the orifices in the siphon manifold so that there is standing water and air is not entrained.
H_FiFluidizedBedToSiphon := 20 cm
H_FiForwardNoSuckAir := 10 cm
H_FiWeirFreefall := 3 cm
H_FiAirRemovalBlockSubmerged := 5 cm
H_FiBypassSafety := 10 cm
H_DrainOutletSafety := 10 cm
H_FiOverflowWeirFreefall := 10 cm
# Sand Properties
D_FiSandES := 0.5 mm
Pi_UCFiSand := 1.65
D_FiSand60 := D_FiSandES*Pi_UCFiSand = 0.825 mm
ε_FiSand := 0.4  # Porosity in a sand bed
Rho_FiSand := 2650*kg/m^3
Pi_FiFluidized := 1.3  # Bed expands 30% when fluidized
k_Kozeny := 5  # Carman-Kozeny coefficient
# Operator Access
W_MpWalkwayMin := 1*m
W_DCWalkway := 1 m
# Minor Loss Coefficients
K_GateValve := 0.39
K_PipeEnt := 0.5
K_PipeExit := 1
K_El90 := 0.9
# Design References
# [reference: MathFunctions.xmcd]
# [reference: PipeDatabase.xmcd]
# needed: mathFunctions, PipeDatabase, FluidsFunctions, StackedRapidSandFilter, MtoAtranslators,
# MtoATranslatorsWrapped, PlumbingF, TankF, DrainchannelF
# [reference: FluidsFunctions.xmcd]
# From SRSF Design Code
Fi_origin := [0 m; 0 m; 0 m]  # Defined for this modular code to work!
# [reference: StackedRapidSandFilterMod.xmcd]
# From SRSF Drawing Code
# [reference: MtoATranslators.xmcd]
# [reference: MtoATranslatorsWrapped.xmcd]
# [reference: PlumbingF.xmcd]
# [reference: TankF.xmcd]
# [reference: DrainChannelF.xmcd]
# [reference: StackedRapidSandFilterACMod.xmcd]
# Filter Modular Script Outputs
# There are seperate AC variables for the modular filter because the plant filter code includes parts that are unnessecary for a modular design.
# Changed from the regular AC.Filter code: FiInletChannelScript becomes FiInletChannelConScript and FiSiphonFinishScript, PlantDrainChannelScript, and FiSiphonScript are not included.
AC_FilterWaterTerminalMod := stack(FiInletChannelConScript, FiTankScript, FiManifoldScript, FiAuxScript, FiSiphonScript, FiSandDrainScript, FiArrayScript, FiWeirScript, FiDistFinishScript, FiBoxDrainFinishScript, FiWaterTerminalScript, FiSandForwardScript)
AC_FilterWaterCleanMod := stack(FiInletChannelConScript, FiTankScript, FiManifoldScript, FiAuxScript, FiSiphonScript, FiSandDrainScript, FiArrayScript, FiWeirScript, FiDistFinishScript, FiBoxDrainFinishScript, FiWaterCleanScript, FiSandForwardScript)
AC_FilterWaterBwMod := stack(FiInletChannelConScript, FiTankScript, FiManifoldScript, FiAuxScript, FiSiphonScript, FiSandDrainScript, FiArrayScript, FiWeirScript, FiDistFinishScript, FiBoxDrainFinishScript, FiWaterBwScript, FiSandBwScript)
AC_FilterWaterMod :=
    AC_FilterWaterTerminalMod if EN_FilterWater == 0
    AC_FilterWaterCleanMod if EN_FilterWater == 1
    AC_FilterWaterBwMod if EN_FilterWater == 2
AC_FilterMod := stack(FiInletChannelConScript, FiTankScript, FiManifoldScript, FiAuxScript, FiSiphonScript, FiSandDrainScript, FiArrayScript, FiWeirScript, FiDistFinishScript, FiBoxDrainFinishScript)
AC_FilterMod :=
    AC_FilterMod if EN_Water == 0
    AC_FilterWaterMod otherwise
# Previews
# [reference: LayoutsAC.xmcd]
# Display Variables
Z_FiWaterSource = 1.899 m
Q_Plant = 0.02 m^3/s
HL_FiEntranceWater = 0.054 m
Z_FiSourceBottom = 1.665 m
AC_FilterMod =  # no stored result
# [component: inputs AC_FilterMod]
