# Code created by Heidi Rausch (her28@cornell.edu)
# Sedimentation Tank Modular Design
Mod := 1
method := "SedimentationTank"
# User Inputs | To be left undefined and inputed online by the user
T_SedWall := .15 m
Q_Plant := 10*L/s
T_SedDividingWall := .15 m
W_PlateUser := 42 in  # plate settler width
T_SedChannelWall := .15 m
ND_ManifoldMax := 8 in  # maximum inlet manifold diameter
H_SedSlopesToFlocWeirMin := .25 m
V_SedUpUser := 1*mm/s  # upflow velocity
V_SedCUser := .12*mm/s  # capture velocity
S_SedPlateUser := 2.5 cm  # spacing between the plate settlers
HL_LaunderUser := 4 cm  # launder orifice head loss
T_FiBoxWall := 15 cm  # Note:  arbitrary input, need for ACoutput to work
# From Expert Inputs
# [reference: ExpertInputs.xmcd]
ND_SedManifoldMax := ND_ManifoldMax
HL_SedLaunderBod := HL_LaunderUser
V_SedUpBod := V_SedUpUser
V_SedCBod := V_SedCUser
# Design References
# [reference: MathFunctions.xmcd]
# [reference: PipeDatabase.xmcd]
# [reference: MaterialsDatabase.xmcd]
# [reference: StackedRapidSandFilter.xmcd]
W_SedPlate := W_PlateUser
S_SedPlate := S_SedPlateUser = 0.025 m
B_SedPlate := S_SedPlate + T_SedPlate
# [reference: FluidsFunctions.xmcd]
# [reference: SedimentationTank.xmcd]
# Drawing Code
# [reference: MtoATranslators.xmcd]
# [reference: MtoATranslatorsWrapped.xmcd]
# [reference: ChannelF.xmcd]
# [reference: PlumbingF_ST587final.xmcd]
# [reference: TankF.xmcd]
# [reference: StairsF.xmcd]
# [reference: DrainChannelF.xmcd]
# [reference: SedimentationTankAC.xmcd]
Floc_Origin[0] := 0 m  # these are just defined as dummy variables to make an if statement later in the code run, they are unused.
L_Floc := 0 m
# Display Variables
# General parameters | Inlet manifold
N_SedTanks = 3
ND_SedManifold = 0.1524 m
ND_SedDiffuser = 0.0254 m
Q_Sed = 0.00333333 m^3/s
L_SedManifoldDiffuser = 0.15 m
N_SedManifoldPorts = 49
V_SedUpBod = 0.001 m/s
# design constraints
ED_SedInlet = 0.136089 m^2/s^3
V_SedCBod = 0.00012 m/s
Q_SedManifoldPort = 6.80272e-5 m^3/s
V_SedUp = 0.0010217 m/s  # Actual values from this design
D_SedManifoldPort = 0.03175 m
Ti_Sed = 1336.49 s
B_SedDiffuser = 0.06 m
L_SedManHorizPipe2 = 2.99029 m
# General dimensions
W_SedDiffuserInner = 0.003175 m
W_Sed = 1.0668 m
H_JetReverserToDiffusers = 0.03 m
L_Sed = 4.17653 m
H_Sed = 1.74298 m
HW_Sed = 1.63661 m
L_SedUpflow = 3.05823 m
W_SedSideSlopes = 0.492633 m  # Plate settlers
H_SedSideSlopes = 0.587097 m
L_SedPlate = 0.5 m
H_SedFlocWeir = 0.837097 m
W_SedPlate = 1.0668 m
H_SedLamellaBottom = 0.985357 m
T_SedPlate = 0.002 m
HW_Sed = 1.63661 m
B_SedPlate = 0.027 m  # center to center distance between lamella
AN_SedSlope = 0.872665
S_SedPlate = 0.025 m  # spacing between lamella
AN_SedHopperSlopeMin = 0.728081
N_SedPlates = 91  # Number of plates per sedimentation tank
N_SedPlatesTotal = 273  # Number of plates for the entire plant
# Inlet channel
N_SedModules = 7  # Number of modules per bay
HW_SedInletChannel = 0.237902 m
N_SedModPlates = 13  # Number of plates per module
W_SedInletChannelPreWeir = 0.28415 m
AN_SedPlate = 1.0472
W_SedInletChannelPostWeir = 0.15 m
W_SedInletChannel = 0.48415 m
L_SedChannel = 3.6504 m
H_SedInletChannel = 0.337902 m
H_SedWeirInlet = 0.257902 m
HL_SedWeirInlet = 0.0129446 m
H_SedInletChannel = 0.337902 m
# Exit channel
W_SedExitChannelPreWeir = 0.15 m
W_SedExitChannelPostWeir = 0.23415 m
W_SedExitChannel = 0.43415 m
H_SedExitChannel = 0.337902 m
H_SedWeirExit = 0.178587 m
H_SedExitChannel = 0.337902 m
# Exit launder
ND_SedLaunder = 0.1016 m
N_SedLaunderOrifices = 30
D_SedLaunderOrifice = 0.015875 m
L_SedLaunder = 2.95776 m
HL_SedLaunderOrifice = 0.0404807 m
B_SedLaunderOrifice = 0.10225 m
AC_SedTankMod =  # error: This variable is undefined.
# Previews
# [reference: LayoutsAC.xmcd]
AI_SedTank = [
    "laythw"; "_-view o t"; "-plot y "; "PublishToWeb PNG.pc3"; "VGA (640.00 x 480.00 Pixels)"; "l n e F"; ""; " ."; "y  [FILEPATH]SedTank_t"; "n y"
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]
