# AguaClara Design Tool
# [reference: BasicInputs- hmr6_Gracias.xmcd]
N_SedTanks = 4
# [reference: DesignAssumptions.xmcd]
# [reference: MathFunctions.xmcd]
# [reference: PipeDatabase.xmcd]
# [reference: MinorLossCoefficients.xmcd]
# [reference: FluidsFunctions.xmcd]
# [reference: Sedimentation Tank.xmcd]
# [reference: Floc Hopper - New Design.xmcd]
Q_Plant = 0.05 m^3/s
# [reference: FCM.xmcd]
# [reference: Flocculator 3 mas 352.xmcd]
# [reference: RapidMixer.xmcd]
# [reference: EntranceTankDim.xmcd]
HW_FlocEnd = 1.5949 m
# [reference: Materials List.xmcd]
# [reference: AutoCADMasterProgram.xmcd]
N_SedBays = 3
# This file must have at least one variable displayed otherwise it doesn't recalculate and it claims that all variables are undefined.
EN_DrillSeries = 1
EN_PipeSpec = 4
L_Sed = 5.14286 m
EN_FcmTube = 0
AC_SedTank = [
    "_-view o t"; "-layer m tank"; "c t 132,132,132"; "tank"; "  "; "_-view o t _zoom w 0.16,-0.16,0 -5.30286,3.16,1.6949 _box 0,0,0 -5.14286,3,1.6949 _box 0.15,-0.15,-0.15 -5.29286,3.15,1.6949 _subtract 0.15,-0.15,-0.15  0,0,0 "; "-layer s 0"; "  "; "-layer f tank"; "  "
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]
AC_FlocTank =  # error: This variable is undefined.
# [component: inputs AC_SedTank]
