# AguaClara Design Tool
Country = 229
Language = 0
C_ChlorineDoseMax := 2*mg/L
C_ChlorineStock := 50*gm/L
Ti_ChlorineStock := 30 hr
Country := 0  # Needs to be redefined as zero until we create a database for all countries.
## References
# MathCAD dimension calculations:
# [reference: BasicClientInputs.xmcd]
# [reference: ExpertInputs.xmcd]
# [reference: MathFunctions.xmcd]
# [reference: PipeDatabase.xmcd]
# [reference: FluidsFunctions.xmcd]
# [reference: SedimentationTank.xmcd]
# [reference: Flocculator.xmcd]
# [reference: LFOM.xmcd]
# [reference: LinearCdc.xmcd]
# [reference: ChemStorageTanks.xmcd]
# [reference: EntranceTank.xmcd]
# [reference: StackedRapidSandFilter.xmcd]
# [reference: MaterialsList.xmcd]
# AutoCAD drawing programs:
# Translators:
# These are the codes that take MathCAD outputs and create AutoCAD scripts that are used to draw the plant (formerly Basics)
# [reference: MtoATranslators.xmcd]
# The wrapped MtoA translator contains the functions that the user will want to access. These functions will draw pieces with full functionality - specifying the location, dimension, and orientation of the object. Also, it contains layer control and subtraction capabilities for grouped objects.
# [reference: MtoATranslatorsWrapped.xmcd]
# Drawing functions:
# [reference: ChannelF.xmcd]
# [reference: PlumbingF.xmcd]
# [reference: TankF.xmcd]
# [reference: StairsF.xmcd]
# [reference: DrainChannelF.xmcd]
# AutoCAD Script Files:
# [reference: FlocculatorAC.xmcd]
# [reference: SedimentationTankAC.xmcd]
# [reference: EntranceTankAC.xmcd]
# [reference: ChemStockTanksAC.xmcd]
# [reference: StackedRapidSandFilterAC.xmcd]
# [reference: CdcAC.xmcd]
# [reference: OperatorAccessAC.xmcd]
# [reference: MaterialsAC.xmcd]
# This file will execute at the very end to create multiple views of the entire plant in paperspace
# [reference: LayoutsAC.xmcd]
## All variables displayed must have the standard SI units. They may not have units attached by the user.
# General
Q_Plant = 0.07 m^3/s
Pi_VenaContractaOrifice = 0.63
T_PlantWall = 0.15 m
W_SedPlate = 1.067 m
T_ConcreteMin = 0.05 m
L_SedPlateSheet = 3 m
C_CoagStock = 262.5 kg/m^3
T_SedPlate = 0.002 m
Ti_CoagStock = 108000 s
T_SedWeir = 0.04 m
C_ChlorineStock = 50 kg/m^3
W_SedBay = 1.067 m
Ti_ChlorineStock = 108000 s
HL_ChannelMax = 0.05 m  # Eliminate FCM variable from design specs
H_PlantFreeboard = 0.1 m
EN_DrillSeries = 0
# Entrance Tank
V_EtUp = 0.008 m/s
W_EtCapture = 1.63701 m
H_EtOverflowChannel =  # error: This variable is undefined.
H_Et = 1.01505 m
H_EtTop = 0.3 m  # height of the top part of the entrance tank above the hoppers
W_Et = 1.63701 m
L_Et = 6.26175 m
ND_EtDrain = 0.0762 m
HL_Lfom = 0.2 m
ZW_Et = 2.6219 m
Z_EtTop = 2.7219 m
Z_Et = 1.70685 m  # elevation of top of slab.
ND_RMPipe = 0.508 m
Z_EtHopper = 2.4219 m
H_EtHopper = 0.71505 m
N_EtHoppers =  # error
ND_EtFlowControl = 0.254 m
L_EtHopper = 1.6317 m
AN_EtSlope = 0.785398
W_EtDC = 0.84885 m  # drain channel under entrance tank dimensions
L_EtDC = 6.41175 m
H_EtDC = 0.300038 m  # Give heights of the channel at the beginning and end and change the design specs to explain that it's sloped.
# Flow measurement
D_LfomOrifices = 0.01905 m
S_LfomRows = 0.02 m
H_LfomOrifice = [0.009525; 0.029525; 0.049525; 0.069525; 0.089525; 0.109525; 0.129525; 0.149525; 0.169525; 0.189525] m
Q_LfomScale = [0; 0.007; 0.014; 0.021; 0.028; 0.035; 0.042; 0.049; 0.056; 0.063; 0.07] m^3/s
N_LfomOrifices = [41; 41; 41; 41; 40; 0; 10; 14; 12; 13]
ND_Lfom = 0.508 m
HL_Lfom = 0.2 m
# Rapid Mix
ED_Tee = 0.0474146 m^2/s^3
Z_LfomOrifices = 2.43143 m  # elevation of the center of
Z_EtExit =  # error  # elevation of center of pipe exiting the entrance tank and heading toward the flocculator
W_DC =  # error
# Maybe give the vertical distances below the bottom of the sed tank of the beginning and end of the channel? Calculate them, display, and add to the design specs.
H_DC =  # error
L_DC =  # error
# Plant Drain Channel
Z_CoagTank = 3.0219 m
Z_CoagTankOutlet = 3.1219 m
L_CdcFloatArm = 0.41275 m
Q_CdcMax = 1.4e-5 m^3/s
L_CdcScaleArm = 0.50165 m
C_CoagDoseMax = 0.06 kg/m^3
B_StockOutlet = 0.1 m
L_CoagCdcTube = 1.20053 m
D_CdcTube = 0.003175 m
N_CoagCdcTubes = 8
HL_Cdc = 0.2 m
L_CdcFloatArm = 0.41275 m
L_CdcScaleArm = 0.50165 m
# Coag Dose Controller
# Flocculator
H_Floc = 2.26375 m
Z_FlocTank = 0 m  # Look at Flocculator Positioning arrays
N_FlocValves = 2
W_FlocChannel = 1.01 m
Ti_Floc =  # error  # Fill last channel with bafffles from last channel
H_FlocSlope = 0.05715 m  # Fix port width to be based on energy dissipation in that channel
ED_Floc = 0.01 m^2/s^3
# Adjust spacing after the number of baffles per channel is known.
V_Floc = 0.133288 m/s  # Check the residence time of the flocculator should be at least 20minutes
HW_FlocEnd = 2.07861 m
ND_FlocValve = 0.1016 m
CP_Floc = 75 m^(2/3)
Ti_FlocDrain = 1800 s
CP_FlocTotal =  # error
N_FlocChannels = 4
G_Floc =  # error
L_FlocTank =  # error
HL_Floc = 0.0851448 m
ED_FlocChannelFirst =  # error
HW_FlocStart = 2.16375 m
S_FlocBaffle = [0.519979; 0.519979; 0.519979; 0.519979] m
B_FlocBaffle = [0.521979; 0.521979; 0.521979; 0.521979] m
N_FlocChannelBaffles = [11; 11; 11; 10]
W_FlocPort = [0.499979; 0.499979; 0.499979; 0.543538] m
S_FlocBaffleFirst =  # error
HL_FlocChannels =  # error
L_FlocBaffleLower = 1.29864 m
L_FlocBaffleUpper = 1.43378 m
H_FlocPort = [1.5756; 1.5756; 1.5756; 1.5756] m
Ti_Floc =  # error  # residence time of the flocculator
N_FlocBaffles =  # error
ND_FlocValve = 4 in
EN_FlocBaffle = 1
# Sed Tanks
N_SedTanks = 7
L_Sed = 6.26175 m
N_SedBays = 2  # Number of bays of inlet manifolds in each sed tank
Q_SedBay = 0.005 m^3/s
V_SedUpBod = 0.001 m/s  # design constraints
V_SedCBod = 0.00012 m/s
V_SedUp = 0.000979679 m/s  # Actual values from this design
V_SedC =  # error
W_SedSideSlopes = 0.52515 m
AN_SedSlope = 0.872665
Ti_Sed =  # error
# Sedimentation Tank Sludge Drain:
N_SedSludgeOrifices = 45  # per cell
Ti_SludgeDrain = 1800 s  # Tank Drain time
W_SedSludge = 0.0893259 m  # Width of the sludge channel
H_SedSludge = 0.0893259 m  # Depth of the sludge channel
# Distance center to center between drain orifices
B_SedSludgeOrifices = 0.106072 m
W_SedDrainCover = 0.129326 m
D_SedSludgeOrifice = 0.00931656 m  # Diameter of drain orifices
N_SedSludgeOrifices = 45
ND_SedSludgePipe = 0.1016 m
# Sedimentation Tank Dimensions:
Z_SedSludge = 0.0893259 m  # Height from 0 of the top of the sludge drain
Z_SedSideSlopes = 0.781876 m
W_Sed = 2.134 m  # Total tank wall height
L_Sed = 6.26175 m  # Total tank length
H_Sed = 2.19779 m
# Sedimentation Tank Inlet Channel:
EN_InletChannelGeom = 1
HW_SedInletChannel = 0.54315 m
W_SedInletChannel = 0.769571 m
L_SedChannel = 15.838 m
H_SedInletChannel = 0.64315 m
HL_SedWeirInlet = 0.0178066 m
W_SedInletChannelPreWeir = 0.543538 m
H_SedWeirInlet = 0.525343 m
W_SedWeirInlet = 15.838 m
# Sedimentation Tank Effluent Launder:
N_SedLaunderOrifices = 46  # Number of orifices per launder
N_SedLaunderOrificesRow =  # error  # Number of orifices per row
Z_SedLaunder = 1.95573 m
Q_SedLaunderOrifices = 0.000108696 m^3/s
B_SedLaunderOrifices = 0.1 m  # Center to center launder spacing
# More Launder Dimensions
ND_SedLaunder = 0.1524 m
D_SedLaunderOrifice = 0.015875 m
L_SedLaunder = 4.86655 m
HL_SedLaunderOrifice = 0.0387398 m
# Sedimentation Tank Inlet Manifold:
ND_SedManifold = 0.2032 m
L_SedManifoldDiffuser = 0.156036 m
Z_SedManifoldPipe = 0.41266 m
ND_SedDiffuser = 0.0254 m
D_SedManifoldPort = 0.03175 m
B_SedManifoldPort = 0.0498125 m
N_SedManifoldPorts = 94
L_SedManifoldPipe = 4.94278 m
ED_SedInlet = 0.01 m^2/s^3
Q_SedManifoldPort = 5.31915e-5 m^3/s
# Exit Channel:
W_SedExitChannel = 0.418944 m
H_SedExitChannel = 0.64315 m
HW_SedExitChannel = 0.50315 m  # water height in exit channel from base of channel
H_SedWeirExit = 0.485229 m
# Lamella:
L_SedPlate = 0.6 m
B_SedPlate = 0.027 m  # center to center distance between lamella
S_SedPlate = 0.025 m  # spacing between lamella
N_SedPlates = 150  # Number of Sed Plates per Sedimentation Tank Bay.
N_SedModules = 15  # Number of modules per bay
N_SedModulePlates = 10  # Number of plates per module
AN_SedPlate = 1.0472
L_SedActive = 4.67423 m
Z_SedLaunder = 1.95573 m
HW_Sed = 2.07861 m
H_Sed = 2.19779 m
# SRSF
H_Fi = 4.65534 m
L_Fi = 1.58239 m
W_Fi = 1.61356 m
B_FiManifoldBranch = 0.1 m
ND_FiTrunk = 0.1524 m
ND_FiManBranch = 0.0254 m
ND_FiBwTrunk = 0.254 m
ND_FiBwManBranch = 0.0381 m
ND_FiExitWaste = 0.1016 m
ND_FiBwWeirDrain =  # error
ND_FiBwDrain =  # error  # For the box that holds keeps the end of the siphon submerged
ND_FiSandOutlet = 0.0508 m
Ti_FiSand = 1215.97 s  # This is the time required to empty the filter of the sand.
ND_FiSiphonAirValve = 0.01905 m
ND_FiSiphon = 0.2032 m
Q_FiSiphonMax =  # error
B_FiSiphonManOrifices = 0.112155 m
N_FiSiphonManOrifices = 12
D_FiSiphonManOrifices = 0.0580795 m
Ti_FiBwInitiation =  # error
H_FiSand = 1.28413 m
N_FiLayer = 6
H_FiLayer = 0.2 m
V_FiLayer = 0.00183333 m/s
HL_FiTerminal = 0.455621 m
V_FiBw = 0.011 m/s
HL_FiBwInitiation = 1.47129 m
HL_FiBwSS = 1.27129 m
D_FiSand =  # error
N_Fi = 3
Q_Fi = 0.0233333 m^3/s
W_Slots =  # error
B_FiBwManSlot = 0.0047625 m
L_FiBwManSlot =  # error
B_FiManSlot = 0.0047625 m
L_FiManSlot =  # error
N_FiSlotRows = 2
Z_FiBottom = -2.63893 m
Z_FiTop = 2.01641 m
# Weirs
HL_FiWeir =  # error
L_FiWeir =  # error
Z_FiEntranceWeir = 1.86715 m
Z_FiBwWeir =  # error
Z_FiSiphonInlet = -0.769566 m  # This is the centerline elevation of the siphon orifices
Z_FiExitWeir =  # error
Z_FiExitBottom = 0.864007 m  # bottom of the filtered water box
Z_FiEntranceBottom = 0.864007 m  # bottom of the entrance box
Z_FiSiphonCoupling = 1.06551 m
Z_FiBwTop =  # error
W_FiBwDrain =  # error
H_FiBwDrain =  # error
N_Launders =  # error
L_LaunderPipeTotal =  # error
N_LaunderCouplings =  # error
N_ValveCouplings = 14
N_SedPlatesTotal = 2100
N_SedPlatesPerSheet = 5
N_SedPlateSheets = 420
N_Valves = 14
A_EtFloor = 12.7102 m^2
W_FlocWithWalls = 4.64 m
L_FlocWithWalls = 6.56175 m
Vol_FlocFloor = 4714.62 L
A_FlocFloor = 31.4308 m^2
Vol_SedSlopes =  # error
A_SedWalls =  # error
A_SedFloor = 105.894 m^2
# Materials List
# Plant Summary Calculations:
HL_PlantTotal := Z_EtTop - H_PlantFreeboard - Z_FiDistPipe
HL_PlantTotal = 3.02225 m
## Make AC variables that are shorter than 598 lines
AC_SedTankA :=
    AC_SedTank if last(AC_SedTank) < 598
    submatrix(AC_SedTank, 0, 598, 0, 0) otherwise
AC_CdcA :=
    AC_Cdc if last(AC_Cdc) < 598
    submatrix(AC_Cdc, 0, 598, 0, 0) otherwise
AC_CdcB :=
    submatrix(AC_Cdc, 599, last(AC_Cdc), 0, 0) if last(AC_Cdc) < 1197
    submatrix(AC_Cdc, 599, 1197, 0, 0) otherwise
AC_SedTankB :=
    submatrix(AC_SedTank, 599, last(AC_SedTank), 0, 0) if last(AC_SedTank) < 1197
    submatrix(AC_SedTank, 599, 1197, 0, 0) otherwise
AC_CdcC :=
    submatrix(AC_Cdc, 1198, last(AC_Cdc), 0, 0) if last(AC_Cdc) < 1796
    submatrix(AC_Cdc, 1198, 1796, 0, 0) otherwise
AC_SedTankC :=
    submatrix(AC_SedTank, 1198, last(AC_SedTank), 0, 0) if last(AC_SedTank) < 1796
    submatrix(AC_SedTank, 1198, 1796, 0, 0) otherwise
AC_SedTankD :=
    submatrix(AC_SedTank, 1797, last(AC_SedTank), 0, 0) if last(AC_SedTank) < 2395
    submatrix(AC_SedTank, 1797, 2395, 0, 0) otherwise
AC_FilterA :=
    AC_Filter if last(AC_Filter) < 598
    submatrix(AC_Filter, 0, 598, 0, 0) otherwise
AC_SedTankE :=
    submatrix(AC_SedTank, 2396, last(AC_SedTank), 0, 0) if last(AC_SedTank) < 2994
    submatrix(AC_SedTank, 2396, 2994, 0, 0) otherwise
AC_FilterB :=
    submatrix(AC_Filter, 599, last(AC_Filter), 0, 0) if last(AC_Filter) < 1197
    submatrix(AC_Filter, 599, 1197, 0, 0) otherwise
AC_FilterC :=
    submatrix(AC_Filter, 1198, last(AC_Filter), 0, 0) if last(AC_Filter) < 1796
    submatrix(AC_Filter, 1198, 1796, 0, 0) otherwise
AC_ChemTanksA :=
    AC_ChemTanks if last(AC_ChemTanks) < 598
    submatrix(AC_ChemTanks, 0, 598, 0, 0) otherwise
AC_FilterD :=
    submatrix(AC_Filter, 1797, last(AC_Filter), 0, 0) if last(AC_Filter) < 2395
    submatrix(AC_Filter, 1797, 2395, 0, 0) otherwise
AC_FilterE :=
    submatrix(AC_Filter, 2396, last(AC_Filter), 0, 0) if last(AC_Filter) < 2994
    submatrix(AC_Filter, 2396, 2994, 0, 0) otherwise
AC_FlocTankA :=
    AC_FlocTank if last(AC_FlocTank) < 598
    submatrix(AC_FlocTank, 0, 598, 0, 0) otherwise
AC_ChemTanksB :=
    submatrix(AC_ChemTanks, 599, last(AC_ChemTanks), 0, 0) if last(AC_ChemTanks) < 1197
    submatrix(AC_ChemTanks, 599, 1197, 0, 0) otherwise
AC_FlocTankB :=
    submatrix(AC_FlocTank, 599, last(AC_FlocTank), 0, 0) if last(AC_FlocTank) < 1197
    submatrix(AC_FlocTank, 599, 1197, 0, 0) otherwise
AC_ChemTanksC :=
    submatrix(AC_ChemTanks, 1198, last(AC_ChemTanks), 0, 0) if last(AC_ChemTanks) < 1796
    submatrix(AC_ChemTanks, 1198, 1796, 0, 0) otherwise
AC_FlocTankC :=
    submatrix(AC_FlocTank, 1198, last(AC_FlocTank), 0, 0) if last(AC_FlocTank) < 1796
    submatrix(AC_FlocTank, 1198, 1796, 0, 0) otherwise
AC_FlocTankD :=
    submatrix(AC_FlocTank, 1797, last(AC_Filter), 0, 0) if last(AC_FlocTank) < 2395
    submatrix(AC_FlocTank, 1797, 2395, 0, 0) otherwise
AC_EntranceTankA :=
    AC_EntranceTank if last(AC_EntranceTank) < 598
    submatrix(AC_EntranceTank, 0, 598, 0, 0) otherwise
AC_EntranceTankB :=
    submatrix(AC_EntranceTank, 599, last(AC_EntranceTank), 0, 0) if last(AC_EntranceTank) < 1197
    submatrix(AC_EntranceTank, 599, 1197, 0, 0) otherwise
AC_EntranceTankC :=
    submatrix(AC_EntranceTank, 1198, last(AC_EntranceTank), 0, 0) if last(AC_EntranceTank) < 1796
    submatrix(AC_EntranceTank, 1198, 1796, 0, 0) otherwise
AC_OperatorAccessA :=
    AC_OperatorAccess if last(AC_OperatorAccess) < 598
    submatrix(AC_OperatorAccess, 0, 598, 0, 0) otherwise
AC_OperatorAccessB :=
    submatrix(AC_OperatorAccess, 599, last(AC_OperatorAccess), 0, 0) if last(AC_OperatorAccess) < 1197
    submatrix(AC_OperatorAccess, 599, 1197, 0, 0) otherwise
AC_OperatorAccessC :=
    submatrix(AC_OperatorAccess, 1198, last(AC_OperatorAccess), 0, 0) if last(AC_OperatorAccess) < 1796
    submatrix(AC_OperatorAccess, 1198, 1796, 0, 0) otherwise
AC_ZZMatApplyA :=
    AC_MatApply if last(AC_MatApply) < 598
    submatrix(AC_MatApply, 0, 598, 0, 0) otherwise
AC_ZZLayoutA :=
    AC_Layout if last(AC_Layout) < 598
    submatrix(AC_Layout, 0, 598, 0, 0) otherwise
AC_ZZMatApplyB :=
    submatrix(AC_MatApply, 1198, last(AC_MatApply), 0, 0) if last(AC_MatApply) < 1197
    submatrix(AC_MatApply, 1198, 1796, 0, 0) otherwise
AC_ZZLayoutB :=
    submatrix(AC_Layout, 1198, last(AC_Layout), 0, 0) if last(AC_Layout) < 1197
    submatrix(AC_Layout, 1198, 1796, 0, 0) otherwise
AC_ZZLayoutC :=
    submatrix(AC_Layout, 1198, last(AC_Layout), 0, 0) if last(AC_Layout) < 1796
    submatrix(AC_Layout, 1198, 1796, 0, 0) otherwise
AC_ZZMatApplyC :=
    submatrix(AC_MatApply, 1198, last(AC_MatApply), 0, 0) if last(AC_MatApply) < 1796
    submatrix(AC_MatApply, 1198, 1796, 0, 0) otherwise
## Display AC variables
AC_EntranceTankA = [
    "-layer m EtCon"; "c t 132,132,132"; "EtCon"; "  "; "_wedge -1.06665,23.69073,1.70685 -1.7817,22.05372,2.4219"; "_mirror l  -0.99165,23.69073 -0.99165,23.70073 n  "; "_box -1.06665,23.69073,1.70685 -0.91665,22.05372,2.4219"; "-array all  R 1 3 -1.7817"; "_zoom w -0.01,23.68073,1.69685 -1.42541,53.65321,4.13875"; "_wedge 0,23.69073,1.70685 -1.43541,29.95248,2.4219"
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]
AC_EntranceTankB = [
    "  "; "_zoom w -6.1036,20.37808,0.274 -5.78175,20.69992,0.314"; "_cylinder -5.94267,20.539,0.304 0.15092 a -5.96267,20.539,0.304"; "rotate3d l  z -5.94267,20.539,0.304 90"; "-group c DeleteMe y "; "all "; "-layer t EtRmOrificePlate"; "  "; "_subtract"; "g EtRmOrificePlate"
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]
AC_EntranceTankC =  # error
AC_FlocTankA = [
    "-layer m FlocTankCon"; "c t 132,132,132"; "FlocTankCon"; "  "; "_-view o t _zoom w 0.16,15.828,0 -6.42175,20.638,2.26375"; "_box 0,15.988,0 -6.26175,20.478,2.26375 _box 0.15,15.838,-0.15 -6.41175,20.628,2.26375"; "_subtract 0.15,15.838,-0.15  0,15.988,0 "; "_box -6.41175,16.998,0 0.15,17.148,2.26375"; "-array l  R 3 1 1.16"; "-group c FlocTankCon y "
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]
AC_FlocTankB = [
    "  ";
    "-layer s FlocModCouplingPlu";
    "  ";
    "_zoom w -5.27917,16.87411,1.05319 -5.1655,16.92189,1.02541";
    "_cylinder -5.22233,16.898,1.0393 0.01389 a -5.21979,16.898,1.0393";
    "_cylinder -5.23233,16.898,1.0393 0.01067 a -5.20979,16.898,1.0393";
    "_subtract -5.22233,16.88411,1.0393  -5.20979,16.88733,1.0393 ";
    "_cylinder -5.26663,16.898,1.0393 0.01389 a -5.26409,16.898,1.0393";
    "_cylinder -5.27663,16.898,1.0393 0.01067 a -5.25409,16.898,1.0393";
    "_subtract -5.26663,16.88411,1.0393  -5.27663,16.88733,1.0393 "
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]
AC_FlocTankD =  # error
AC_FlocTankC =  # error
AC_OperatorAccessA = [
    "-layer m OpWalkwayCon"; "c t 132,132,132"; "OpWalkwayCon"; "  "; "_-view o f"; "_pline"; "-11.2934,3.0346"; "-10.9934,3.0346"; "-10.9934,2.82318"; "-10.6934,2.82318"
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]
AC_OperatorAccessC =  # error
AC_OperatorAccessB =  # error
AC_SedTankA = [
    "-layer m SedTankCon"; "c t 132,132,132"; "SedTankCon"; "  "; "_-view o r"; "_pline"; "2.184,0"; "1.64516,0"; "1.64516,0.08933"; "1.66516,0.08933"
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]
AC_SedTankB = [
    "_subtract";
    "g SedTankCon";
    " g DeleteMe ";
    "-layer f SedTankCon";
    "  ";
    "_cylinder -4.92531,1.42429,1.32051 0.03016 a -6.36504,1.42429,1.32051";
    "_cylinder -4.91531,1.42429,1.32051 0.0276 a -6.37504,1.42429,1.32051";
    "_zoom w -6.37504,1.38413,1.32051 -6.35504,1.46446,1.32051";
    "_subtract -6.36504,1.45446,1.32051  -6.37504,1.45189,1.32051 ";
    "_zoom w -5.52164,1.38413,2.02907 -4.83911,1.46446,2.0894"
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]
AC_SedTankC = [
    "-group c SedFittingPlu y "; "all "; "-layer s 0"; "  "; "-layer f SedFittingPlu"; "  "; "-layer t Sed*"; "  "; "-layer s 0"; "  "
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]
AC_SedTankD = [
    "l "; "-layer t SedTankCon"; "  "; "_subtract"; "g SedTankCon"; " g DeleteMe "; "-layer f SedTankCon"; "  "; "_cylinder -5.58871,15.66973,0.97629 0.10954 a -6.2662,15.66973,0.97629"; "_cylinder -5.57871,15.66973,0.97629 0.1006 a -6.2762,15.66973,0.97629"
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]
AC_SedTankE =  # error
AC_ChemTanksA = [
    "-layer m CoagTanks"; "c t 132,132,132"; "CoagTanks"; "  "; "_-view o t"; "_zoom w -9.1334,22.12073,1.3696 -7.5534,23.70073,3.0446"; "_cylinder -8.3434,22.91073,3.0346 0.78 a -9.9984,22.91073,3.0346"; "rotate3d l  y -8.3434,22.91073,3.0346 90"; "-group c CoagTanks y "; "all "
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]
AC_ChemTanksB = [
    "_mirror -10.73245,23.27978,2.83964  -10.73245,23.26073 -10.72245,23.27073 n _union -10.69951,23.25819,2.83964 -10.71898,23.2742,2.83964 -10.73245,23.29367,2.83964 ";
    "rotate3d l  z -10.7134,23.26073,2.83964 90";
    "rotate3d l  y -10.7134,23.26073,2.83964 270";
    "_-view o t";
    "_zoom w -10.77539,22.06384,2.7967 -10.68951,22.14972,2.84449 _torus -10.73245,22.10678,2.82059 0.01905 0.01067 _box -10.77217,22.06706,2.79993 -10.73245,22.1465,2.84126 _subtract -10.70274,22.10678,2.82059  -10.77217,22.06706,2.79993 ";
    "_torus -10.73245,22.10678,2.82059 0.01905 0.00966 _subtract -10.70274,22.10678,2.82059  -10.76116,22.10678,2.82059  _box -10.74245,22.06706,2.79993 -10.69274,22.10678,2.84126 _subtract -10.73245,22.1365,2.82059  -10.74245,22.06706,2.79993 ";
    "_cylinder -10.73245,22.12583,2.82059 0.01389 a -10.73499,22.12583,2.82059 _cylinder -10.72245,22.12583,2.82059 0.01067 a -10.74499,22.12583,2.82059 _subtract -10.73245,22.11194,2.82059  -10.72245,22.11516,2.82059 ";
    "_mirror -10.73245,22.12583,2.82059  -10.73245,22.10678 -10.72245,22.11678 n _union -10.69951,22.10424,2.82059 -10.71898,22.12025,2.82059 -10.73245,22.13972,2.82059 ";
    "rotate3d l  z -10.7134,22.10678,2.82059 180";
    "_-view o t"
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]
AC_ChemTanksC =  # error
AC_FilterA = [
    "-layer m FiInletChannelCon"; "c t 132,132,132"; "FiInletChannelCon"; "  "; "_-view o t _zoom w -7.40175,10.80344,0.80802 -8.2106,15.998,2.01641"; "_box -7.56175,10.96344,0.80802 -8.0506,15.838,2.01641 _box -7.41175,10.81344,0.65802 -8.2006,15.988,2.01641"; "_subtract -7.41175,10.81344,0.65802  -7.56175,10.96344,0.80802 "; "-group c FiInletChannelCon y "; "all "; "-layer s 0"
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]
AC_FilterD = [
    "_cylinder -7.06175,13.13591,-1.03793 0.11827 a -6.99775,13.13591,-1.03793";
    "_cylinder -7.2073,13.13591,-1.03793 0.11827 a -7.1433,13.13591,-1.03793";
    "_cylinder -7.1433,13.13591,-1.03793 0.10954 a -7.06175,13.13591,-1.03793";
    "_union -6.99775,13.01764,-1.03793 -7.2073,13.01764,-1.03793 -7.06175,13.02637,-1.03793 ";
    "rotate3d l  y -7.06175,13.13591,-1.03793 270";
    "-group c DeleteMe y ";
    "l ";
    "-layer t DrainChannelCon";
    "  ";
    "_subtract"
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]
AC_FilterB = [
    "_box -8.2006,14.69056,0.86401 -9.23505,15.838,2.01641 _box -8.0506,14.54056,0.71401 -9.38505,15.988,2.01641";
    "_subtract -8.0506,14.54056,0.71401  -8.2006,14.69056,0.86401 ";
    "_-view o t _zoom w -9.22505,14.53056,0.86401 -10.14167,15.998,2.01641";
    "_box -9.38505,14.69056,0.86401 -9.98167,15.838,2.01641 _box -9.23505,14.54056,0.71401 -10.13167,15.988,2.01641";
    "_subtract -9.23505,14.54056,0.71401  -9.38505,14.69056,0.86401 ";
    "-group c FiEntExitBoxCon y ";
    "all ";
    "-layer s 0";
    "  ";
    "-layer f FiEntExitBoxCon"
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]
AC_FilterE =  # error
AC_FilterC = [
    "_cylinder -8.85468,15.06678,0.76226 0.08414 a -8.77768,15.06678,0.76226";
    "_subtract -8.84468,14.97471,0.76226  -8.85468,14.98264,0.76226 ";
    "_cylinder -8.78768,15.06678,0.76226 0.08414 a -8.74293,15.06678,0.76226";
    "_cylinder -8.79768,15.06678,0.76226 0.07725 a -8.73293,15.06678,0.76226";
    "_subtract -8.78768,14.98264,0.76226  -8.79768,14.98953,0.76226 ";
    "_union -8.68593,14.97471,0.76226 -8.84468,14.97471,0.76226 -8.74293,14.98264,0.76226 ";
    "rotate3d l  y -8.74293,15.06678,0.76226 90";
    "_-view o t";
    "_zoom w -9.30221,14.73611,-1.62828 -8.64086,15.39746,-1.42413 _torus -8.97153,15.06678,-1.5262 0.2286 0.08414 _box -9.29427,14.74404,-1.62034 -8.97153,15.38952,-1.43207 _subtract -8.6588,15.06678,-1.5262  -9.29427,14.74404,-1.62034 ";
    "_torus -8.97153,15.06678,-1.5262 0.2286 0.07725 _subtract -8.6588,15.06678,-1.5262  -9.27739,15.06678,-1.5262  _box -8.98153,14.74404,-1.62034 -8.6488,15.06678,-1.43207 _subtract -8.97153,15.37952,-1.5262  -8.98153,14.74404,-1.62034 "
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]
HW_Sed = 2.07861 m
# this variable is displayed to ensure that LabView can read AC.ZZEnd (error in LabView "read mathcad file" code that it misses the last variable)
AC_CdcA = [
    "-layer m Cdc";
    "c t 125,0,160";
    "Cdc";
    "  ";
    "-insert https://confluence.cornell.edu/download/attachments/173604905/CdcLeverArm.dwg";
    "-5.9911,22.22198,2.7468 x 1 1  270";
    "-insert https://confluence.cornell.edu/download/attachments/173604905/CdcLeverArmBracket.dwg";
    "-6.40385,22.18998,2.7219 x 1 1  270";
    "-insert https://confluence.cornell.edu/download/attachments/173604905/CdcCht.dwg";
    "-7.3372,22.22198,2.8396 x 1 1  90"
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]
AC_CdcC =  # error
AC_CdcB =  # error
# AC_ZZMatApplyA | AC_ZZMatApplyB
AC_ZZMatApplyC
AC_ZZLayoutA = ["laythw -view _SEISO "]
AC_ZZLayoutC =  # error
AC_ZZLayoutB =  # error
