# [reference: MasterProgram.xmcd]
# [reference: AlumstockCylinder.xmcd]
# DESIGN ASSUMPTIONS
W_ApColumn := 20 cm
L_ApColumn := 20 cm  # Stock Tank  Parameters
H_ApColumn := 120 cm
T_ChannelWall := T_PlantWall
D_Drum := 15 cm
W_CpColumn := 20 cm
L_CpColumn := 20 cm
H_Drum := 0.7 m
H_CpColumn := 120 cm
S_Drum := 15 cm
W_MpColumn := 30 cm
W_CpWalkway := 30 cm
L_MpColumn := W_MpColumn
W_ApWalkway := 30 cm
T_PltWall := T_PlantWall
W_HumanMin = 0.45 m
T_Ap := T_PlantWall
T_Cp := T_PlantWall
T_ChemTankWall := 5 mm
R_AlumTank = 1.04645 m
T_EtWall := T_PlantWall
T_PlantWall = 0.15 m
# ASSUMPTIONS
S_BetweenTanks := 20 cm
S_TankBorder := 25 cm
S_Operator := 1 m
# ORIGIN POINTS
Ap_Origin := [
    AlumTank1_origin[0] - (R_AlumTank + T_ChemTankWall) - S_TankBorder;
    AlumTank1_origin[1] - 3*(R_AlumTank + T_ChemTankWall) - S_BetweenTanks - S_TankBorder;
    AlumTank1_origin[2]
]
Stairs_Origin := [
    Ap_Origin[0] + 2*(R_AlumTank + T_ChemTankWall) + S_TankBorder + S_Operator;
    AlumTank1_origin[1] + (R_AlumTank + T_ChemTankWall) + S_TankBorder;
    AlumTank1_origin[2]
]
# DIMENSION POINTS
Ap_Dimensions := [
    2*(R_AlumTank + T_ChemTankWall) + S_TankBorder + S_Operator;
    2*S_TankBorder + (4*R_AlumTank + 4*T_ChemTankWall) + S_BetweenTanks;
    -H_ApColumn
]
H_Total := H_ApColumn
Stairs(Stairs_Origin, W_Total, H_Total, Angle) :=
    H_Stairs ← 30 cm
    N_Stairs ← floor(H_Total/H_Stairs)
    Residual ← mod(H_Total, H_Stairs)
    Npoints ← 2*N_Stairs + 1
    L_Total ← N_Stairs*H_Stairs
    PointMatrix[0] ← [Stairs_Origin[0]; Stairs_Origin[2]]
    View ← viewfront1
    for i ∈ 1 .. Npoints - 1
        PointMatrix[i] ← PointMatrix[i - 1] + [H_Stairs; 0] if mod(i, 2) ≠ 0
        PointMatrix[i] ← PointMatrix[i - 1] + [0; -H_Stairs] if mod(i, 2) == 0
    PointMatrix[Npoints] ← PointMatrix[Npoints - 1] + [0; Residual]
    PointMatrix[Npoints + 1] ← PointMatrix[Npoints] + [-L_Total; 0]
    PointMatrix[Npoints + 2] ← PointMatrix[0]
    PLineStairs ← Pline(PointMatrix)
    Zoom ← zoom_win([Stairs_Origin[0]; Stairs_Origin[2]] + [0; H_Total], [Stairs_Origin[0]; Stairs_Origin[2]] + [L_Total; 0])
    Stairs_Extrude ← extrude([Stairs_Origin[0]; Stairs_Origin[2]], W_Total)
    ViewTop ← viewtop1
    MoveStairs ← move([Stairs_Origin[0]; 0; Stairs_Origin[2]], [Stairs_Origin[0]; 0; Stairs_Origin[2]], [0; Stairs_Origin[1]; 0])
    RotateStairs ← Rotate3DLast(Stairs_Origin, "y", Angle)
    Final ←
        stack(View, PLineStairs, Zoom, Stairs_Extrude, ViewTop, MoveStairs) if Angle == 0
        stack(View, PLineStairs, Zoom, Stairs_Extrude, ViewTop, MoveStairs, RotateStairs) otherwise
    return Final
W_Total := Ap_Dimensions[1]
ApScript :=
    AlumPlatformLayer ← layer_new("AlumPlatform", grey)
    PlatformBox ← BoxF(Ap_Origin, Ap_Origin + Ap_Dimensions, [0; 0; 0]*deg)
    FreezePlatformBox ← FreezeLayer("AlumPlatform")
    return stack(AlumPlatformLayer, PlatformBox, FreezePlatformBox)
StairsScript :=
    ApStairs ← SelectLayer("AlumPlatform")
    Stairs ← Stairs(Stairs_Origin, W_Total, H_Total, 0 deg)
    FreezeApStairs ← FreezeLayer("AlumPlatform")
    return stack(ApStairs, Stairs, FreezeApStairs)
# [component: inputs stack(ApScript, StairsScript)]
