# [reference: MasterProgram.xmcd]
# [reference: Operator Access v2 lxa3.xmcd]
Walkway_Origin2 :=
    [Plant_Origin[0] - T_PlantWall - L_Sed; Plant_Origin[1]; H_Sed - S_Walkway] if EN_PlantDrains == 0
    [Plant_Origin[0] + T_PlantWall + W_Walkway; Plant_Origin[1]; H_Sed - S_Walkway] otherwise
AlumTank1_origin :=
    if EN_PlantDrains == 0
        [
            Plant_Origin[0] - T_PlantWall - L_Sed;
            Et_Origin[1] + 2*R_AlumTank + T_ChemTankWall;
            Z_EtTop + H_AlumTankAboveHeadTank + HL_ChemDoserMin - B_StockOutlet
        ]
    otherwise
        [
            Plant_Origin[0] + T_PlantWall + W_Walkway;
            Et_Origin[1] + 2*R_AlumTank + T_ChemTankWall;
            Z_EtTop + H_AlumTankAboveHeadTank + HL_ChemDoserMin - B_StockOutlet
        ]
AlumTank1_origin2 :=
    if EN_PlantDrains == 0
        [
            Plant_Origin[0] - T_PlantWall - L_Sed;
            Et_Origin[1] - W_MpWalkway - R_AlumTank - T_ChemTankWall;
            Z_EtTop + H_AlumTankAboveHeadTank + HL_ChemDoserMin - B_StockOutlet
        ]
    otherwise
        [
            Plant_Origin[0] - T_PlantWall - L_Sed;
            Et_Origin[1] - W_MpWalkway - R_AlumTank - T_ChemTankWall;
            Z_EtTop + H_AlumTankAboveHeadTank + HL_ChemDoserMin - B_StockOutlet
        ]
alumtankscript :=
    layernew ← layer_new("alumtanks", grey)
    viewtop ← viewtop1
    outertankwall ← cylinderC(AlumTank1_origin, R_AlumTank + T_ChemTankWall, H_AlumTank + T_ChemTankWall)
    innertankwall ← cylinderC([AlumTank1_origin[0]; AlumTank1_origin[1]; AlumTank1_origin[2] + T_ChemTankWall], R_AlumTank, H_AlumTank)
    viewtop ← viewtop1
    subtract ← subtractD([AlumTank1_origin[0] - (R_AlumTank + T_ChemTankWall); AlumTank1_origin[1]; AlumTank1_origin[2]], [AlumTank1_origin[0] - R_AlumTank; AlumTank1_origin[1]; AlumTank1_origin[2]])
    mirror ← mirror_all([AlumTank1_origin[0] - zc; AlumTank1_origin[1] - (R_AlumTank + T_ChemTankWall) - T_ConcreteMin], [AlumTank1_origin[0] + zc; AlumTank1_origin[1] - (R_AlumTank + T_ChemTankWall) - T_ConcreteMin])
    union ← union_allA
    layerset0 ← layer_set("0")
    layerfreeze ← layer_freeze("alumtanks")
    one ← stack(layernew, viewtop, outertankwall, innertankwall, viewtop, subtract, mirror, union, layerset0, layerfreeze)
    return one
AC_ChemTanks := stack(alumtankscript)
# [component: inputs AC_ChemTanks]
