# Width and length of the chemical platform are defined in ChemStockTanksAC
ChemPlatform_Origin := [
    CoagTank_Origin[0] + R_CoagTank + T_ChemTankWall + S_ChemTankBorder - L_EtChemPlatform;
    Et_Origin[1] + W_Et + T_PlantWall - W_EtChemPlatform;
    CoagTank_Origin[2] - T_ChemTankWall - T_PlantWall
]
ChemPlatform_Dimensions := [L_EtChemPlatform; W_EtChemPlatform; T_PlantWall]
# Chemical Dose Controller
# Dimensions
L_CdcLever := 0.45 m  # assumed from Drew's drawing for now
W_LeverArm := 0.0032 m
D_LATeetoLAOrigin := 0.0079 m
# Length of the float pipe must fill both caps plus some.
L_CdcFloat := 2*(CapHeight(ND_EtFloat) - CapThickness(ND_EtFloat)) + 1 in
D_CdcCht := 6 in
Z_FloatTop := ZW_Et - HL_Flowmeasure + 1/2*L_CdcFloat + CapThickness(ND_EtFloat)
# The elevation of the float with the center of the float being at the bottom row of orifices of the LFOM.
D_LeverOrigintoArm := 0.0336 m  # Distance from the lever arm origin (which is on the tee holding the lever arm up) to the lever arm
H_LeverHole := 0.0312 m - 0.0095/2*m
# Distance from the top of the entrance tank to the to the middle of the lever arm hole for the cable - (minus the) radius of the hole
D_Cable := 0.1 in
L_Cable := Z_EtTop + H_LeverHole - Z_FloatTop
D_LABracketOrigintoEndBracket := 0.0079 m
# This is the distance from the lever arm bracket origin (at the center of the hole of the bracket holding up the lever arm) to the end of the bracket
D_LeverHole := 0.0063 m  # Distance from the float end of the lever arm to the middle of the hole where the float cable will be attached.
D_LABOrigintoLAOriginX := 0.032 m
D_LABOrigintoLAOriginZ := 0.0254 m  # Edited DLABOrigintoLAOriginZ to accommodate dimensions from McMaster vs Inserted Drawing
T_CdcDt := 0.003 m  # Thickness of the drop tube
L_LAOriginToDtX := 0.0290 m  # Distance from the lever arm origin to the center of the drop tube in the x direction
L_LAOriginToDtY := 0.7812 m  # Distance from the lever arm origin to the outside center of the top part of the drop tube in the y direction
L_LAOriginToDtZ := 0.0429 m  # Distance from the lever arm origin to the drop tube in the z direction
L_LAOriginToDtCenterX := 0.0290 m  # Distance from the lever arm origin to the center of the drop tube in the x direction
T_CdcReducer := 0.0095 m  # Measured from CDC research team's apparatus
L_LAOriginToReducerX := 0.0290 m  # Distance from the lever arm origin to the center of the reducer in the x direction
L_LAOriginToReducerY := 0.7315 m  # Distance from the lever arm origin to the outside center of the top part of the reducer in the y direction
L_LAOriginToReducerZ := 0.1094 m  # Distance from the lever arm origin to the center of the large part of the reducer in the z direction
L_LAOriginToReducerCenterX := 0.0290 m  # Distance from the lever arm origin to the center of the reducer in the x direction
L_LAOriginToReducerCenterY := 0.7919 m  # Distance from the lever arm origin to the center of the reducer in the y direction
L_LAOriginToDtX2 := 0.0396 m
L_LAOriginToDtY2 := 0.7919 m
L_Slider := 3 in
R_LArmBar := 3/16*in
D_LArmBar := 3/8*in
W_LBracket := 5/8*in
L_LBracket := 2 in
T_LBracket := .08 in
L_LArmBar := 4 in
W_Slider := 3.2*10^-3*m
H_LeverArm := 0.0254 m
W_LeverArm = 0.0032 m
ND_DropTube := 1/2*in
L_DropTube := .61 m
H_Slider := 5/8*in
L_LAOriginToReducerX2 := 0.0893 m
L_LAOriginToReducerY2 := 0.7919 m
OD_CdcFitting := 5/32*in  # Outer diameter of fitting- measured from CDC research team's fitting
ID_CdcFitting := 0.126 in  # Inner diameter of fitting- measured from CDC research team's fitting
L_CdcFitting := 0.75 in  # Length of fitting - measured from CDC research team's fitting
# Origin Points
LA_Origin := [
    Et_Origin[0] - L_Et - T_PlantWall;
    Et_Origin[1] + ConRadius(ND_EtFloat) + S_EtFloat/2;
    Z_EtTop + D_LABOrigintoLAOriginZ
]
LA2_Origin := [LA_Origin[0]; LA_Origin[1] - ConRadius(ND_EtFloat) - S_EtFloat/2; LA_Origin[2]]
LA3_Origin := [LA_Origin[0]; LA_Origin[1] + ConRadius(ND_EtFloat) + S_EtFloat/2; LA_Origin[2]]
LADtFitting_Origin := [
    LA_Origin[0] + L_CdcLever - L_LAOriginToDtY + innerdiameter(ND_DropTube, PS_Modules)/2 - .02 in;
    LA_Origin[1] + 1/8*in + L_LAOriginToDtCenterX;
    L_LAOriginToDtZ + LA2_Origin[2]
]
LAReducerFitting_Origin := [-L_LAOriginToReducerY - T_CdcReducer + L_CdcLever/2; L_LAOriginToReducerX; L_LAOriginToDtZ] + LA_Origin
# need to edit fitting origin to follow new LAorign
LADt_Center := [
    LA_Origin[0] + L_CdcLever - L_LAOriginToDtY;
    LA_Origin[1] + 1/8*in + L_LAOriginToDtCenterX;
    LA_Origin[2] + L_LAOriginToDtZ + H_LeverArm
]
LAReducer_Center := LA_Origin + [-L_LAOriginToReducerCenterY; L_LAOriginToReducerCenterX; L_LAOriginToDtZ]
# Defines the center of the reducer. (The center in the z direction is the center of the larger part of the reducer).
CHT_Origin := [
    Et_Origin[0] - L_Et - L_ChemTankShift - T_PlantWall + D_CdcCht/2;
    LA_Origin[1];
    Z_CdcFloatValveOrifice
] = [-5.53402; 7.14867; 2.54085] m
LA2DtFitting_Origin := [
    LA2_Origin[0] + L_CdcLever - L_LAOriginToDtY + innerdiameter(ND_DropTube, PS_Modules)/2 - .02 in;
    LA2_Origin[1] + 1/8*in + L_LAOriginToDtCenterX;
    LA2_Origin[2] + L_LAOriginToDtZ
]
LA2ReducerFitting_Origin := [-L_LAOriginToReducerY - T_CdcReducer + L_CdcLever/2; L_LAOriginToReducerX; L_LAOriginToDtZ] + LA2_Origin
LA2Dt_Center := [
    LA2_Origin[0] + L_CdcLever - L_LAOriginToDtY;
    LA2_Origin[1] + 1/8*in + L_LAOriginToDtCenterX;
    LA2_Origin[2] + L_LAOriginToDtZ + H_LeverArm
]
LA2Reducer_Center := LA2_Origin + [-L_LAOriginToReducerCenterY; L_LAOriginToReducerCenterX; L_LAOriginToDtZ]
# will need to modify the y component of the origin since the constant head tanks will need to be offset more than the lever arms.
CHT2_Origin := [CHT_Origin[0]; CHT_Origin[1] - 2*D_CdcCht; CHT_Origin[2]]
LA3DtFitting_Origin := [
    LA3_Origin[0] + L_CdcLever - L_LAOriginToDtY + innerdiameter(ND_DropTube, PS_Modules)/2 - .02 in;
    LA3_Origin[1] + 1/8*in + L_LAOriginToDtCenterX;
    LA3_Origin[2] + L_LAOriginToDtZ
] = [-4.93227; 7.34911; 2.49145] m
LA3ReducerFitting_Origin := [-L_LAOriginToReducerY - T_CdcReducer + L_CdcLever/2; L_LAOriginToReducerX; L_LAOriginToDtZ] + LA3_Origin = [-5.12622; 7.34594; 2.49145] m
LA3Dt_Center := [
    LA3_Origin[0] + L_CdcLever - L_LAOriginToDtY;
    LA3_Origin[1] + 1/8*in + L_LAOriginToDtCenterX;
    LA3_Origin[2] + L_LAOriginToDtZ + H_LeverArm
]
LA3Reducer_Center := LA3_Origin + [-L_LAOriginToReducerCenterY; L_LAOriginToReducerCenterX; L_LAOriginToDtZ]
CHT3_Origin := [CHT_Origin[0]; CHT_Origin[1] + 2*D_CdcCht; CHT_Origin[2]]
# Lever Arms, Drop Tubes and Constant head tanks
CdcLayer := layer_new("CdcLayer", black)
LArm1 := BoxF([LA_Origin[0] - L_CdcLever; LA_Origin[1] + 1/8*in; LA_Origin[2]], [LA_Origin[0] + L_CdcLever; LA_Origin[1]; LA_Origin[2] + H_LeverArm], [0; 0; 0]*deg)
DropTube1 := PipeF(LADt_Center, L_DropTube, [0; -90]*deg, ND_DropTube, PS_Modules)
LBracketLA1 := LBracket2F([LA_Origin[0]; LA_Origin[1] - L_LArmBar/2 + zc; LA_Origin[2] - L_LBracket + W_LBracket + D_LArmBar])
InsertCht := insertdwg("https://confluence.cornell.edu/download/attachments/173604905/CdcCht.dwg", CHT_Origin, 1, 1, 90 deg)
LArm2 := BoxF([LA2_Origin[0] - L_CdcLever; LA2_Origin[1] + 1/8*in; LA2_Origin[2]], [LA2_Origin[0] + L_CdcLever; LA2_Origin[1]; LA2_Origin[2] + H_LeverArm], [0; 0; 0]*deg)
DropTube2 := PipeF(LA2Dt_Center, L_DropTube, [0; -90]*deg, ND_DropTube, PS_Modules)
LBracketLA2 := LBracket2F([
    LA2_Origin[0];
    LA2_Origin[1] - L_LArmBar/2 + zc;
    LA2_Origin[2] - L_LBracket + W_LBracket + D_LArmBar
])
InsertCht2 := insertdwg("https://confluence.cornell.edu/download/attachments/173604905/CdcCht.dwg", CHT2_Origin, 1, 1, 90 deg)
LArm3 := BoxF([LA3_Origin[0] - L_CdcLever; LA3_Origin[1] + 1/8*in; LA3_Origin[2]], [LA3_Origin[0] + L_CdcLever; LA3_Origin[1]; LA3_Origin[2] + H_LeverArm], [0; 0; 0]*deg)
DropTube3 := PipeF(LA3Dt_Center, L_DropTube, [0; -90]*deg, ND_DropTube, PS_Modules)
LBracketLA3 := LBracket2F([
    LA3_Origin[0];
    LA3_Origin[1] - L_LArmBar/2 + zc;
    LA3_Origin[2] - L_LBracket + W_LBracket + D_LArmBar
])
InsertCht3 := insertdwg("https://confluence.cornell.edu/download/attachments/173604905/CdcCht.dwg", CHT3_Origin, 1, 1, 90 deg)
FreezeCdcLayer := FreezeLayer("CdcLayer")
# Connecting bars and Cylinders
ConnectCylinderLayer := layer_new("CdcConnectCylinder", ltgrey)
LarmBar1 := CylinderSUBF([
    LA_Origin[0] + W_LBracket/2;
    LA_Origin[1] - T_LBracket + L_LArmBar/2;
    LA_Origin[2] + L_LBracket/2 - L_LBracket/8
], R_LArmBar, L_LArmBar, [90; 0]*deg, ["CdcLayer"])
LarmBar2 := CylinderSUBF([
    LA2_Origin[0] + W_LBracket/2;
    LA2_Origin[1] - T_LBracket + L_LArmBar/2;
    LA2_Origin[2] + L_LBracket/2 - L_LBracket/8
], R_LArmBar, L_LArmBar, [90; 0]*deg, ["CdcLayer"])
LarmBar3 := CylinderSUBF([
    LA3_Origin[0] + W_LBracket/2;
    LA3_Origin[1] - T_LBracket + L_LArmBar/2;
    LA3_Origin[2] + L_LBracket/2 - L_LBracket/8
], R_LArmBar, L_LArmBar, [90; 0]*deg, ["CdcLayer"])
ConnectionCylinder2 := CylinderSUBF([
    LA_Origin[0] - L_CdcLever/4 + L_CdcLever/2 + .55*L_CdcLever;
    LA2_Origin[1] - 6*W_LeverArm;
    LA_Origin[2] + 4*W_LeverArm
], D_Cable, (LA3_Origin - LA2_Origin)[1] - .25*L_CdcLever, [270; 0]*deg, ["CdcLayer"])
ConnectionCylinder3 := CylinderSUBF([
    LA_Origin[0] - L_CdcLever/4 + L_CdcLever/2 + .55*L_CdcLever;
    LA2_Origin[1] - 3*W_LeverArm;
    LA_Origin[2] + 4*W_LeverArm
], D_Cable, LA3_Origin[1] - LA2_Origin[1] + 6*W_LeverArm, [270; 0]*deg, ["CdcLayer"])
FreezeConnectCylinderLayer := FreezeLayer("CdcConnectCylinder")
# Sliders
SliderLayer := layer_new("CdcSliders", dkgrey)
Slider1FirstSide := BoxF([
    LA_Origin[0] - L_CdcLever + L_Slider - .3*L_Slider;
    LA_Origin[1] - W_LeverArm;
    LA_Origin[2] + H_LeverArm + W_Slider
], [
    LA_Origin[0] - L_CdcLever + 2*L_Slider - .3*L_Slider;
    LA_Origin[1] - W_LeverArm + W_Slider;
    LA_Origin[2] + H_LeverArm - H_Slider + W_Slider
], [0; 0; 0]*deg)
Slider2FirstSide := BoxF([
    LA2_Origin[0] - L_CdcLever + L_Slider - .3*L_Slider;
    LA2_Origin[1] - W_LeverArm;
    LA2_Origin[2] + H_LeverArm + W_Slider
], [
    LA2_Origin[0] - L_CdcLever + 2*L_Slider - .3*L_Slider;
    LA2_Origin[1] - W_LeverArm + W_Slider;
    LA2_Origin[2] + H_LeverArm - H_Slider + W_Slider
], [0; 0; 0]*deg)
Slider3FirstSide := BoxF([
    LA3_Origin[0] - L_CdcLever + L_Slider - .3*L_Slider;
    LA3_Origin[1] - W_LeverArm;
    LA3_Origin[2] + H_LeverArm + W_Slider
], [
    LA3_Origin[0] - L_CdcLever + 2*L_Slider - .3*L_Slider;
    LA3_Origin[1] - W_LeverArm + W_Slider;
    LA3_Origin[2] + H_LeverArm - H_Slider + W_Slider
], [0; 0; 0]*deg)
Slider1TopSide := BoxF([
    LA_Origin[0] - L_CdcLever + L_Slider - .3*L_Slider;
    LA_Origin[1] - W_LeverArm;
    LA_Origin[2] + H_LeverArm + W_Slider
], [
    LA_Origin[0] - L_CdcLever + 2*L_Slider - .3*L_Slider;
    LA_Origin[1] - W_LeverArm + W_Slider;
    LA_Origin[2] + H_LeverArm - H_Slider + W_Slider
], [0; 0; 90]*deg)
Slider2TopSide := BoxF([
    LA2_Origin[0] - L_CdcLever + L_Slider - .3*L_Slider;
    LA2_Origin[1] - W_LeverArm;
    LA2_Origin[2] + H_LeverArm + W_Slider
], [
    LA2_Origin[0] - L_CdcLever + 2*L_Slider - .3*L_Slider;
    LA2_Origin[1] - W_LeverArm + W_Slider;
    LA2_Origin[2] + H_LeverArm - H_Slider + W_Slider
], [0; 0; 90]*deg)
Slider3TopSide := BoxF([
    LA3_Origin[0] - L_CdcLever + L_Slider - .3*L_Slider;
    LA3_Origin[1] - W_LeverArm;
    LA3_Origin[2] + H_LeverArm + W_Slider
], [
    LA3_Origin[0] - L_CdcLever + 2*L_Slider - .3*L_Slider;
    LA3_Origin[1] - W_LeverArm + W_Slider;
    LA3_Origin[2] + H_LeverArm - H_Slider + W_Slider
], [0; 0; 90]*deg)
Slider1SecondSide := BoxF([
    LA_Origin[0] - L_CdcLever + L_Slider - .3*L_Slider;
    LA_Origin[1] - W_LeverArm + H_Slider - W_Slider;
    LA_Origin[2] + H_LeverArm + W_Slider
], [
    LA_Origin[0] - L_CdcLever + 2*L_Slider - .3*L_Slider;
    LA_Origin[1] - W_LeverArm + H_Slider;
    LA_Origin[2] + H_LeverArm - H_Slider + W_Slider
], [0; 0; 0]*deg)
Slider2SecondSide := BoxF([
    LA2_Origin[0] - L_CdcLever + L_Slider - .3*L_Slider;
    LA2_Origin[1] - W_LeverArm + H_Slider - W_Slider;
    LA2_Origin[2] + H_LeverArm + W_Slider
], [
    LA2_Origin[0] - L_CdcLever + 2*L_Slider - .3*L_Slider;
    LA2_Origin[1] - W_LeverArm + H_Slider;
    LA2_Origin[2] + H_LeverArm - H_Slider + W_Slider
], [0; 0; 0]*deg)
Slider3SecondSide := BoxF([
    LA3_Origin[0] - L_CdcLever + L_Slider - .3*L_Slider;
    LA3_Origin[1] - W_LeverArm + H_Slider - W_Slider;
    LA3_Origin[2] + H_LeverArm + W_Slider
], [
    LA3_Origin[0] - L_CdcLever + 2*L_Slider - .3*L_Slider;
    LA3_Origin[1] - W_LeverArm + H_Slider;
    LA3_Origin[2] + H_LeverArm - H_Slider + W_Slider
], [0; 0; 0]*deg)
FreezeSliders := FreezeLayer("CdcSliders")
# Float Cable, Caps, and Pipe
CdcLayerAll := layer_new("CdcAll", ltgrey)
FloatCable := CylinderF([LA_Origin[0] + L_CdcLever; LA_Origin[1] + W_LeverArm/2; Z_FloatTop], D_Cable, L_Cable, [0; 90]*deg)
[
    LA_Origin[0] - L_CdcLever/4 + L_CdcLever/2 + .55*L_CdcLever;
    LA2_Origin[1] - 6*W_LeverArm;
    LA_Origin[2] + 4*W_LeverArm
]
FreezeCdcAll := FreezeLayer("CdcAll")
FloatCapsLayer := layer_new("CdcFloatCapPlu", green)
CdcFloatCapTop := CapF([LA_Origin[0] + L_CdcLever; LA_Origin[1] + W_LeverArm/2; Z_FloatTop - CapThickness(ND_EtFloat)], [0; -90]*deg, ND_EtFloat)
CdcFloatCapBottom := CapF([
    LA_Origin[0] + L_CdcLever;
    LA_Origin[1] + W_LeverArm/2;
    Z_FloatTop - CapThickness(ND_EtFloat) - L_CdcFloat
], [0; 90]*deg, ND_EtFloat)
FreezeFloatCaps := FreezeLayer("CdcFloatCapPlu")
FloatPipeLayer := layer_new("CdcFloatPipePlu", blue)
CdcFloatPipe := PipeF([LA_Origin[0] + L_CdcLever; LA_Origin[1]; Z_FloatTop - CapThickness(ND_EtFloat)], L_CdcFloat, [0; -90]*deg, ND_EtFloat, PS_Default)
FreezeFloatPipe := FreezeLayer("CdcFloatPipePlu")
Cdc3_Script := stack(CdcLayer, LBracketLA1, LArm1, DropTube1, InsertCht, LBracketLA2, LArm2, DropTube2, InsertCht2, LBracketLA3, LArm3, DropTube3, InsertCht3, FreezeCdcLayer, ConnectCylinderLayer, ConnectionCylinder3, LarmBar3, LarmBar2, LarmBar1, FreezeConnectCylinderLayer, SliderLayer, Slider1FirstSide, Slider2FirstSide, Slider3FirstSide, Slider1TopSide, Slider2TopSide, Slider3TopSide, Slider1SecondSide, Slider2SecondSide, Slider3SecondSide, FreezeSliders, CdcLayerAll, FloatCable, FreezeCdcAll, FloatCapsLayer, CdcFloatCapTop, CdcFloatCapBottom, FreezeFloatCaps, FloatPipeLayer, CdcFloatPipe, FreezeFloatPipe)
Cdc2_Script := stack(CdcLayer, CdcLayerAll, LBracketLA1, LArm1, DropTube1, LarmBar1, InsertCht, LBracketLA2, LArm2, DropTube2, LarmBar2, InsertCht2, ConnectionCylinder2, FloatCable, FreezeCdcLayer, FreezeCdcAll, SliderLayer, Slider1FirstSide, Slider2FirstSide, Slider1TopSide, Slider2TopSide, Slider1SecondSide, Slider2SecondSide, FreezeSliders, FloatCapsLayer, CdcFloatCapTop, CdcFloatCapBottom, FreezeFloatCaps, FloatPipeLayer, CdcFloatPipe, FreezeFloatPipe)
Cdc1_Script := stack(CdcLayer, CdcLayerAll, LBracketLA1, LArm1, DropTube1, LarmBar1, InsertCht, FloatCable, FreezeCdcLayer, FreezeCdcAll, SliderLayer, Slider1FirstSide, Slider1TopSide, Slider1SecondSide, FreezeSliders, Slider1TopSide, FloatCapsLayer, CdcFloatCapTop, CdcFloatCapBottom, FreezeFloatCaps, FloatPipeLayer, CdcFloatPipe, FreezeFloatPipe)
CdcFittingsLayer := layer_new("CdcFittings", ltgrey)
CdcFittingOuter :=
    CylinderSUBF(LADtFitting_Origin, OD_CdcFitting/2, L_CdcFitting, [180; 0]*deg, ["CdcLayer"]) if N_FiCoagCdcTubes ≤ 3
    CylinderSUBF(LADtFitting_Origin, OD_CdcFitting/2, L_CdcFitting, [180; 0]*deg, ["CdcLayer"]) otherwise
CdcFittingOuter_Array :=
    ArrayLastPolar(LADt_Center, N_FiCoagCdcTubes, 180 deg) if N_FiCoagCdcTubes ≤ 3
    ArrayLastPolar(LADt_Center, N_FiCoagCdcTubes, 180 deg) otherwise
CdcFittingOuter2 :=
    CylinderSUBF(LA2DtFitting_Origin, OD_CdcFitting/2, L_CdcFitting, [180; 0]*deg, ["CdcLayer"]) if N_CdcCoagTubes ≤ 3
    CylinderSUBF(LA2DtFitting_Origin, OD_CdcFitting/2, L_CdcFitting, [180; 0]*deg, ["CdcLayer"]) otherwise
CdcFittingOuter2_Array :=
    ArrayLastPolar(LA2Dt_Center, N_CdcCoagTubes, 180 deg) if N_CdcCoagTubes ≤ 3
    ArrayLastPolar(LA2Dt_Center, N_CdcCoagTubes, 180 deg) otherwise
CdcFittingOuter3 :=
    CylinderSUBF(LA3DtFitting_Origin, OD_CdcFitting/2, L_CdcFitting, [180; 0]*deg, ["CdcLayer"]) if N_CdcChlorineTubes ≤ 3
    CylinderSUBF(LA3DtFitting_Origin, OD_CdcFitting/2, L_CdcFitting, [180; 0]*deg, ["CdcLayer"]) otherwise
CdcFittingOuter3_Array :=
    ArrayLastPolar(LA3Dt_Center, N_CdcChlorineTubes, 180 deg) if N_CdcChlorineTubes ≤ 3
    ArrayLastPolar(LA3Dt_Center, N_CdcChlorineTubes, 180 deg) otherwise
SliderDtConnect1 := CylinderSUBF([
    LA_Origin[0] + L_CdcLever - L_LAOriginToDtY;
    LA_Origin[1] + W_LeverArm;
    LA_Origin[2] + .75*H_LeverArm
], ID_CdcFitting/2, 2.1*L_CdcFitting, [270; 0]*deg, ["CdcLayer"; "Sliders"])
SliderDtConnect2 := CylinderSUBF([
    LA2_Origin[0] + L_CdcLever - L_LAOriginToDtY;
    LA2_Origin[1] + W_LeverArm;
    LA2_Origin[2] + .75*H_LeverArm
], ID_CdcFitting/2, 2.1*L_CdcFitting, [270; 0]*deg, ["Sliders"; "CdcLayer"])
SliderDtConnect3 := CylinderSUBF([
    LA3_Origin[0] + L_CdcLever - L_LAOriginToDtY;
    LA3_Origin[1] + W_LeverArm;
    LA3_Origin[2] + .75*H_LeverArm
], ID_CdcFitting/2, 2.1*L_CdcFitting, [270; 0]*deg, ["Sliders"; "CdcLayer"])
ScrewHead1 := CylinderF([
    LA_Origin[0] + L_CdcLever - L_LAOriginToDtY - .65*L_Slider;
    LA_Origin[1] + W_LeverArm + 1.7*L_CdcFitting;
    LA_Origin[2] + .75*H_LeverArm
], 1.5*OD_CdcFitting, .2*L_CdcFitting, [90; 0]*deg)
ScrewHead2 := CylinderF([
    LA2_Origin[0] + L_CdcLever - L_LAOriginToDtY - .65*L_Slider;
    LA2_Origin[1] + W_LeverArm + 1.7*L_CdcFitting;
    LA2_Origin[2] + .75*H_LeverArm
], 1.5*OD_CdcFitting, .2*L_CdcFitting, [90; 0]*deg)
ScrewHead3 := CylinderF([
    LA3_Origin[0] + L_CdcLever - L_LAOriginToDtY - .65*L_Slider;
    LA3_Origin[1] + W_LeverArm + 1.7*L_CdcFitting;
    LA3_Origin[2] + .75*H_LeverArm
], 1.5*OD_CdcFitting, .2*L_CdcFitting, [90; 0]*deg)
Screw1 := CylinderSUBF([
    LA_Origin[0] + L_CdcLever - L_LAOriginToDtY - .65*L_Slider;
    LA_Origin[1] + W_LeverArm;
    LA_Origin[2] + .75*H_LeverArm
], ID_CdcFitting/2, 1.5*L_CdcFitting, [270; 0]*deg, ["Sliders"])
Screw2 := CylinderSUBF([
    LA2_Origin[0] + L_CdcLever - L_LAOriginToDtY - .65*L_Slider;
    LA2_Origin[1] + W_LeverArm;
    LA2_Origin[2] + .75*H_LeverArm
], ID_CdcFitting/2, 1.5*L_CdcFitting, [270; 0]*deg, ["Sliders"])
Screw3 := CylinderSUBF([
    LA3_Origin[0] + L_CdcLever - L_LAOriginToDtY - .65*L_Slider;
    LA3_Origin[1] + W_LeverArm;
    LA3_Origin[2] + .75*H_LeverArm
], ID_CdcFitting/2, 1.5*L_CdcFitting, [270; 0]*deg, ["Sliders"])
FreezeCdcFittings := FreezeLayer("CdcFittings")
CdcFittingInner :=
    CylinderSUBF(LADtFitting_Origin, ID_CdcFitting/2, L_CdcFitting, [180; 0]*deg, ["CdcLayer"]) if N_FiCoagCdcTubes ≤ 3
    CylinderSUBF(LAReducerFitting_Origin, ID_CdcFitting/2, L_CdcFitting, [180; 0]*deg, ["CdcLayer"]) otherwise
CdcFittingInner_Array :=
    ArrayLastPolar(LADt_Center, N_FiCoagCdcTubes, 180 deg) if N_FiCoagCdcTubes ≤ 3
    ArrayLastPolar(LAReducer_Center, N_FiCoagCdcTubes, 180 deg) otherwise
CdcFittingInner2 :=
    CylinderSUBF(LA2DtFitting_Origin, ID_CdcFitting/2, L_CdcFitting, [180; 0]*deg, ["CdcLayer"]) if N_CdcCoagTubes ≤ 3
    CylinderSUBF(LA2ReducerFitting_Origin, ID_CdcFitting/2, L_CdcFitting, [180; 0]*deg, ["CdcLayer"]) otherwise
CdcFittingInner2_Array :=
    ArrayLastPolar(LA2Dt_Center, N_CdcCoagTubes, 180 deg) if N_CdcCoagTubes ≤ 3
    ArrayLastPolar(LA2Reducer_Center, N_CdcCoagTubes, 180 deg) otherwise
CdcFittingInner3 :=
    CylinderSUBF(LA3DtFitting_Origin, ID_CdcFitting/2, L_CdcFitting, [180; 0]*deg, ["CdcLayer"]) if N_CdcChlorineTubes ≤ 3
    CylinderSUBF(LA3ReducerFitting_Origin, ID_CdcFitting/2, L_CdcFitting, [180; 0]*deg, ["CdcLayer"]) otherwise
CdcFittingInner3_Array :=
    ArrayLastPolar(LA3Dt_Center, N_CdcChlorineTubes, 180 deg) if N_CdcChlorineTubes ≤ 3
    ArrayLastPolar(LA3Reducer_Center, N_CdcChlorineTubes, 180 deg) otherwise
GroupFitting := GroupAll("DeleteMe")
SubtractFittingInner := SubtractF(["CdcFittings"], "DeleteMe")
FreezeCdcFittings := FreezeLayer("CdcFittings")
# Fittings (will update to mainfold system soon)
# Flexible Tubing (not currently drawn)
FlexConnectLayer := layer_new("CdcFlexConnect", red)
# n.temp specifies number of divisions the parabola will use (5 is a good number, do not exceed 10)
# dir.t specifies the tangency of the inlet and outlet, in the form of a 2-point point array. e.g. (1,0,0),(0,0,-1) is read as inlet facing positive x direction, outlet facing negative z direction
# Cat.Lt is the length of the tube minus the length of the pieces fitted over the couplings
# Inlet and outlet are the inlet and outlet coordinates, corresponding to the center point directly on the end of the coupling.
# ID and OD are inner and outer diameters of pipe, respectively
SweepPoint1 := LA_Origin + [-.0894; -.792; .1092]*m
SweepPoint2 := SweepPoint1 + [1; 0; 0]*in
FlexTubeF(n_temp, dir_t, inlet, outlet, Cat_Lt, ID, OD, LayerName, LayerColor) :=
    PP ← ParPointF(n_temp, dir_t, inlet, outlet, Cat_Lt)
    TP ← TanPoints(n_temp, dir_t, inlet, outlet, Cat_Lt)
    Inner ← FlexCylinderF(n_temp, dir_t, inlet, outlet, Cat_Lt, ID)
    Group ← GroupLast("DeleteMe")
    Layer ← layer_new(LayerName, LayerColor)
    Outer ← FlexCylinderF(n_temp, dir_t, inlet, outlet, Cat_Lt, OD)
    SubtractInner ← SubtractF([LayerName], "DeleteMe")
    Mirror ← concat("mirror", sp, "g", sp, LayerName, sp, sp, "0,0", sp, "0,100", sp, "y")
    Final ← stack(Layer, Outer, FreezeLayer(LayerName), Inner, Group, SubtractInner, layer_thaw(LayerName), Mirror, FreezeLayer(LayerName))
    return Final
SweepPoint5 := CHT_Origin + [.1432; 0; -.0629]*m
SweepPoint4 := SweepPoint5 + [1; 0; 0]*in
SweepPoint3 := [(SweepPoint1[0] + SweepPoint5[0])/2; (SweepPoint1[1] + SweepPoint5[1])/2; SweepPoint1[2] - 50 cm]
SweepPathPoints := [SweepPoint1; SweepPoint2; SweepPoint3; SweepPoint4; SweepPoint5]
FlexTube_Trial := FlexTube(SweepPathPoints, .125 in, .2 in, "CdcFlexConnect", red)
# Insert in stack when flexcylinder fixed
FlexConnectLayer, FlexTube_Trial, FreezeLayer("CdcFlexConnect")
# Flex tube Trial with new code!
# n.temp specifies number of divisions the parabola will use (5 is a good number, do not exceed 10)
# dir.t specifies the tangency of the inlet and outlet, in the form of a 2-point point array. e.g. (1,0,0),(0,0,-1) is read as inlet facing positive x direction, outlet facing negative z direction
# Cat.Lt is the length of the tube minus the length of the pieces fitted over the couplings
# Inlet and outlet are the inlet and outlet coordinates, corresponding to the center point directly on the end of the coupling.
# ID and OD are inner and outer diameters of pipe, respectively
FlexTubeF(n_temp, dir_t, inlet, outlet, Cat_Lt, ID, OD, LayerName, LayerColor) :=
    PP ← ParPointF(n_temp, dir_t, inlet, outlet, Cat_Lt)
    TP ← TanPoints(n_temp, dir_t, inlet, outlet, Cat_Lt)
    Inner ← FlexCylinderF(n_temp, dir_t, inlet, outlet, Cat_Lt, ID)
    Group ← GroupLast("DeleteMe")
    Layer ← layer_new(LayerName, LayerColor)
    Outer ← FlexCylinderF(n_temp, dir_t, inlet, outlet, Cat_Lt, OD)
    SubtractInner ← SubtractF([LayerName], "DeleteMe")
    Mirror ← concat("mirror", sp, "g", sp, LayerName, sp, sp, "0,0", sp, "0,100", sp, "y")
    Final ← stack(Layer, Outer, FreezeLayer(LayerName), Inner, Group, SubtractInner, layer_thaw(LayerName), Mirror, FreezeLayer(LayerName))
    return Final
FlexConnectLayer := layer_new("CdcFlexConnect", red)
NewTube := FlexTubeF(5, [-1, 0; 0, 1; 0, 0], LA_Origin, CHT_Origin, 1.5 m, 1 in, 1 in, "CdcFlexConnect", red)
FlexConnectLayer, NewTube, FreezeLayer("CdcFlexConnect")
CdcFittings3_Script := stack(CdcFittingsLayer, CdcFittingOuter3, CdcFittingOuter3_Array, CdcFittingOuter2, CdcFittingOuter2_Array, SliderDtConnect3, SliderDtConnect2, SliderDtConnect1, Screw3, Screw2, Screw1, ScrewHead3, ScrewHead2, ScrewHead1, FreezeCdcFittings, CdcFittingInner3, CdcFittingInner3_Array, CdcFittingInner2, CdcFittingInner2_Array, GroupFitting, SubtractFittingInner)
CdcFittings2_Script := stack(CdcFittingsLayer, CdcFittingOuter2, CdcFittingOuter2_Array, SliderDtConnect2, SliderDtConnect1, Screw2, Screw1, ScrewHead2, ScrewHead1, FreezeCdcFittings, CdcFittingInner2, CdcFittingInner2_Array, GroupFitting, SubtractFittingInner)
CdcFittings1_Script := stack(CdcFittingsLayer, CdcFittingOuter, CdcFittingOuter_Array, SliderDtConnect1, Screw1, ScrewHead1, FreezeCdcFittings, CdcFittingInner, CdcFittingInner_Array, GroupFitting, SubtractFittingInner)
# Calibration Column Definitions
SF_CalCol := 1.25
Ti_Res := 1.25*min
H_CalCol := 30 cm
Q_CoagCalColMax := SF_CalCol*Q_CoagStock
Vol_CoagCalCol := Ti_Res*Q_CoagCalColMax
D_inCoagCCMin := sqrt(4*Vol_CoagCalCol/(π*H_CalCol)) = 1.57064 in
ND_CoagCalCol := NominalDiameter(D_inCoagCCMin, PS_Default)
D_inCoagCalCol := innerdiameter(ND_CoagCalCol, PS_Default) = 1.734 in
Q_ChlorCalColMax := SF_CalCol*Q_ChlorineStock
Vol_ChlorCalCol := Ti_Res*Q_ChlorCalColMax
D_inChlorCCMin := sqrt(4*Vol_ChlorCalCol/(π*H_CalCol)) = 0.49668 in
ND_ChlorCalCol := NominalDiameter(D_inChlorCCMin, PS_Default)
D_inChlorCalCol := innerdiameter(ND_ChlorCalCol, PS_Default) = 1.175 in
Q_FCCalColMax := SF_CalCol*Q_FiCoagStock
Vol_FCCalCol := Ti_Res*Q_FCCalColMax
D_inFCCCMin := sqrt(4*Vol_FCCalCol/(π*H_CalCol)) = 0.136021 in
ND_FCCalCol := NominalDiameter(D_inFCCCMin, PS_Default)
D_inFCCalCol := innerdiameter(ND_FCCalCol, PS_Default) = 1.175 in
R_Cylinder := .5 cm
# Calibration Column Origin Points
CalCol_Origin := [
    ChemPlatform_Origin[0] + L_EtChemPlatform + ConRadius(ND_FCCalCol);
    CoagTank_Origin[1] + R_CoagTank + T_ChemTankWall + S_ChemTankBorder - 0.5*W_EtChemPlatform;
    Z_CoagulantOutlet
]
TopCap_Origin := [CalCol_Origin[0]; CalCol_Origin[1]; CalCol_Origin[2] + H_CalCol]
CoagCalCol_Origin := [
    CalCol_Origin[0] - ConRadius(ND_FCCalCol) + ConRadius(ND_CoagCalCol);
    CalCol_Origin[1] - ConRadius(ND_CoagCalCol) - ConRadius(ND_FCCalCol) - 2*zc;
    Z_CoagulantOutlet
]
CoagTopCap_Origin := [CoagCalCol_Origin[0]; CoagCalCol_Origin[1]; CoagCalCol_Origin[2] + H_CalCol]
ChlorCalCol_Origin := [
    CalCol_Origin[0] - ConRadius(ND_FCCalCol) + ConRadius(ND_ChlorCalCol);
    CalCol_Origin[1] + ConRadius(ND_FCCalCol) + ConRadius(ND_ChlorCalCol) + 2*zc;
    Z_CoagulantOutlet
]
ChlorTopCap_Origin := [ChlorCalCol_Origin[0]; ChlorCalCol_Origin[1]; ChlorCalCol_Origin[2] + H_CalCol]
# To draw the hole in the top cap, we are subtracting a cylinder from the top cap layer
Cylinder_Origin := [CalCol_Origin[0]; CalCol_Origin[1]; CalCol_Origin[2] + H_CalCol/2]
CoagCylinder_Origin := [CoagCalCol_Origin[0]; CoagCalCol_Origin[1]; CoagCalCol_Origin[2] + H_CalCol/2]
ChlorCylinder_Origin := [ChlorCalCol_Origin[0]; ChlorCalCol_Origin[1]; ChlorCalCol_Origin[2] + H_CalCol/2]
# Calibration Column
MakeCalColLayer := layer_new("CdcCalColumnPlu", ltpurple)
MainFCCalCol := PipeF(CalCol_Origin, H_CalCol, [0; 90]*deg, ND_FCCalCol, PS_Default)
MainCoagCalCol := PipeF(CoagCalCol_Origin, H_CalCol, [0; 90]*deg, ND_CoagCalCol, PS_Default)
MainChlorCalCol := PipeF(ChlorCalCol_Origin, H_CalCol, [0; 90]*deg, ND_ChlorCalCol, PS_Default)
FreezeCalCol := FreezeLayer("CdcCalColumnPlu")
MakeCapsLayer := layer_new("CdcColumnCapsPlu", blue2)
TopCap := CapF(TopCap_Origin, [0; -90]*deg, ND_FCCalCol)
BottomCap := CapF(TopCap_Origin - [0 m; 0 m; H_CalCol], [0; 90]*deg, ND_FCCalCol)
CoagTopCap := CapF(CoagTopCap_Origin, [0; -90]*deg, ND_CoagCalCol)
CoagBottomCap := CapF(CoagTopCap_Origin - [0 m; 0 m; H_CalCol], [0; 90]*deg, ND_CoagCalCol)
ChlorTopCap := CapF(ChlorTopCap_Origin, [0; -90]*deg, ND_ChlorCalCol)
ChlorBottomCap := CapF(ChlorTopCap_Origin - [0 m; 0 m; H_CalCol], [0; 90]*deg, ND_ChlorCalCol)
FreezeCapsLayer := FreezeLayer("CdcColumnCapsPlu")
DrawCylinder := CylinderF(Cylinder_Origin, R_Cylinder, H_CalCol, [0; 90]*deg)
DrawCoagCylinder := CylinderF(CoagCylinder_Origin, R_Cylinder, H_CalCol, [0; 90]*deg)
DrawChlorCylinder := CylinderF(ChlorCylinder_Origin, R_Cylinder, H_CalCol, [0; 90]*deg)
LayCylinder := GroupAll("DeleteMe")
MakeHole := SubtractF(["CdcColumnCapsPlu"], "DeleteMe")
LayStand := layer_new("CdcCalColumnStand", yellow)
BoardDim_Vert := [
    2*ConRadius(ND_CoagCalCol) + 2*ConRadius(ND_FCCalCol) + 2*ConRadius(ND_ChlorCalCol) + 4*zc;
    1.5*in;
    H_CalCol + Z_CoagulantOutlet - (ChemPlatform_Origin[2] + ChemPlatform_Dimensions[2])
]
VertBoard_Origin := [
    CoagCalCol_Origin[0] - ConRadius(ND_CoagCalCol);
    CoagCalCol_Origin[1] + ConRadius(ND_CoagCalCol);
    ChemPlatform_Origin[2] + ChemPlatform_Dimensions[2]
]
FarCorner_VertBoard := BoardDim_Vert + VertBoard_Origin
BoardDim_Horiz := [BoardDim_Vert[0]; BoardDim_Vert[2]/(2*tan(60*deg)); 1.5*in]
HorizBoard_Origin := VertBoard_Origin + [0; BoardDim_Vert[1]; 0]
FarCorner_HorizBoard := BoardDim_Horiz + HorizBoard_Origin
BoardDim_Slant := [BoardDim_Vert[0]; 1.5 in; BoardDim_Vert[2]/(2*sin(60 deg))]
SlantBoard_Origin := FarCorner_HorizBoard
FarCorner_SlantBoard := SlantBoard_Origin + [-BoardDim_Slant[0]; -BoardDim_Slant[1]; BoardDim_Slant[2]]
MakeSlantBoard := BoxF(SlantBoard_Origin, FarCorner_SlantBoard, [0; 0; 30]*deg)
MakeVertBoard := BoxF(VertBoard_Origin, FarCorner_VertBoard, [0; 0; 0])
MakeHorizBoard := BoxF(HorizBoard_Origin, FarCorner_HorizBoard, [0; 0; 0])
RotateSupport := Rotate_All(VertBoard_Origin, 90 deg)
MoveSupport := MoveAll(VertBoard_Origin, VertBoard_Origin - [0 m; 2*ConRadius(ND_CoagCalCol); 0 m])
FreezeBoards := FreezeLayer("CdcCalColumnStand")
CdcCalColumn3_Script := stack(MakeCalColLayer, MainFCCalCol, MainCoagCalCol, MainChlorCalCol, FreezeCalCol, MakeCapsLayer, TopCap, BottomCap, CoagTopCap, CoagBottomCap, ChlorTopCap, ChlorBottomCap, FreezeCapsLayer, DrawCylinder, DrawCoagCylinder, DrawChlorCylinder, LayCylinder, MakeHole, LayStand, MakeSlantBoard, MakeVertBoard, MakeHorizBoard, RotateSupport, MoveSupport, FreezeBoards)
CdcCalColumn2_Script := stack(MakeCalColLayer, MainCoagCalCol, MainChlorCalCol, FreezeCalCol, MakeCapsLayer, CoagTopCap, CoagBottomCap, ChlorTopCap, ChlorBottomCap, FreezeCapsLayer, DrawChlorCylinder, LayCylinder, MakeHole, LayStand, MakeSlantBoard, MakeVertBoard, MakeHorizBoard, RotateSupport, MoveSupport, FreezeBoards)
CdcCalColumn1_Script := stack(MakeCalColLayer, MainChlorCalCol, FreezeCalCol, MakeCapsLayer, ChlorTopCap, ChlorBottomCap, FreezeCapsLayer, DrawChlorCylinder, LayCylinder, MakeHole, LayStand, MakeSlantBoard, MakeVertBoard, MakeHorizBoard, RotateSupport, MoveSupport, FreezeBoards)
AC_Cdc3 := stack(Cdc3_Script, CdcFittings3_Script, CdcCalColumn3_Script)
AC_Cdc2 := stack(Cdc2_Script, CdcFittings2_Script, CdcCalColumn2_Script)
AC_Cdc1 := stack(Cdc1_Script, CdcFittings1_Script, CdcCalColumn1_Script)
AC_Cdc := AC_Cdc2
