# Width and length of the chemical platform are defined in ChemStockTanksAC
ChemPlatform_Origin := [
    CoagTank_Origin[0] + R_CoagTank + T_ChemTankWall + S_ChemTankBorder - L_EtChemPlatform;
    Et_Origin[1] + W_Et + T_PlantWall - W_EtChemPlatform;
    CoagTank_Origin[2] - T_ChemTankWall - T_PlantWall
]
ChemPlatform_Dimensions := [L_EtChemPlatform; W_EtChemPlatform; T_PlantWall]
# Chemical Dose Controller
# Dimensions
# Length of the float pipe must fill both caps plus some.
L_CdcFloat := 2*(CapHeight(ND_EtFloat) - CapThickness(ND_EtFloat)) + 1 in
Z_FloatTop := ZW_Et - HL_Flowmeasure + 1/2*L_CdcFloat + CapThickness(ND_EtFloat)
# The elevation of the float with the center of the float being at the bottom row of orifices of the LFOM.
L_Cable := Z_EtTop + H_LeverHole - Z_FloatTop
# remember L.CdcLever is half the total length of the lever arm
# five gallons bucket dimensions for constant head tanks
D_CHT := 30 cm
H_CHT := 37 cm
T_CHTwall := 1 cm
PS_FlexTube := 2
B_DosingTubes := 3 in
# Origin Points
LA_Origin :=
    if EN_DoubleTrain == 0
        [
            Et_Origin[0] - L_Et - T_PlantWall;
            Et_Origin[1] + ConRadius(ND_EtFloat) + S_EtFloat/2;
            Z_EtTop + D_LABOrigintoLAOriginZ
        ]
    otherwise
        [
            Et_Origin[0] - Et_Dim[0] + 1.5*L_LfomChannel + 2*T_ChannelWall;
            Et_Origin[1] - S_Fitting;
            Z_EtTop + D_LABOrigintoLAOriginZ
        ]
LA2_Origin := [LA_Origin[0] - ConRadius(ND_EtFloat) - S_EtFloat/2; LA_Origin[1]; LA_Origin[2]]
LADt_Center := [
    LA_Origin[0] - L_LAOriginToDtCenterX;
    LA_Origin[1] - L_LAOriginToDtY/2;
    LA_Origin[2] + L_LAOriginToDtZ + H_LeverArm
]
CHT_Origin :=
    if EN_DoubleTrain == 0
        [
            Et_Origin[0] - L_Et - L_ChemTankShift - T_PlantWall + D_CdcCht/2;
            LA_Origin[1];
            Z_CdcFloatValveOrifice
        ]
    otherwise
        [
            ChemPlatform_Origin[0] + 3/4*L_EtChemPlatform;
            ChemPlatform_Origin[1] - 1/2*D_CHT;
            Z_CdcFloatValveOrifice
        ]
    = [-13.5881; 17.0671; 3.00376] m
LA2Dt_Center := [
    LA2_Origin[0] - L_LAOriginToDtCenterX;
    LA2_Origin[1] - L_LAOriginToDtY/2;
    LA2_Origin[2] + L_LAOriginToDtZ + H_LeverArm
]
# will need to modify the y component of the origin since the constant head tanks will need to be offset more than the lever arms.
CHT2_Origin := [CHT_Origin[0] - 2*D_CHT; CHT_Origin[1]; CHT_Origin[2]]
Float_Origin := [LA_Origin[0]; LA_Origin[1] + W_LeverArm/2 + L_CdcLever; Z_FloatTop - CapThickness(ND_EtFloat)] = [-9.30883; 18.6732; 2.55195] m
Slider1_Origin := [
    LA_Origin[0] - H_Slider + W_Slider;
    LA_Origin[1] - L_LAOriginToDtY/2 - H_Slider;
    LA_Origin[2] + H_LeverArm + W_Slider
] = [-9.32151; 17.8151; 2.94006] m
Slider2_Origin := [
    LA2_Origin[0] - H_Slider + W_Slider;
    LA2_Origin[1] - L_LAOriginToDtY/2 - H_Slider;
    LA2_Origin[2] + H_LeverArm + W_Slider
] = [-9.48978; 17.8151; 2.94006] m
# Lever Arms, Drop Tubes and Constant head tanks
MakeCdcLayer := layer_new("CdcLayer", black)
LArm1 := BoxF([LA_Origin[0] + 1/8*in; LA_Origin[1] - L_CdcLever; LA_Origin[2]], [LA_Origin[0]; LA_Origin[1] + L_CdcLever; LA_Origin[2] + H_LeverArm], [0; 0; 0]*deg)
DropTube1 := PipeF(LADt_Center, L_DropTube, [0; -90]*deg, ND_DropTube, PS_Modules)
LBracketLA1 := LBracket2F([LA_Origin[0] - L_LArmBar/4; LA_Origin[1] + L_LArmBar/2; LA_Origin[2] - 3/8*L_LBracket], W_LBracket, L_LBracket, T_LBracket, [-90; 0; 0]*deg)
CHT1 := ConstantHeadTankF(CHT_Origin, [90; 0; 90]*deg, D_CHT/2, H_CHT, T_CHTwall, .75*H_CHT, 1 in, 1 in, 1 in, 1 in)
LArm2 := BoxF([LA2_Origin[0] + 1/8*in; LA2_Origin[1] - L_CdcLever; LA2_Origin[2]], [LA2_Origin[0]; LA2_Origin[1] + L_CdcLever; LA2_Origin[2] + H_LeverArm], [0; 0; 0]*deg)
DropTube2 := PipeF(LA2Dt_Center, L_DropTube, [0; -90]*deg, ND_DropTube, PS_Modules)
LBracketLA2 := LBracket2F([LA2_Origin[0] - L_LArmBar/4; LA2_Origin[1] + L_LArmBar/2; LA2_Origin[2] - 3/8*L_LBracket], W_LBracket, L_LBracket, T_LBracket, [-90; 0; 0]*deg)
CHT2 := ConstantHeadTankF(CHT2_Origin, [90; 0; 90]*deg, D_CHT/2, H_CHT, T_CHTwall, .75*H_CHT, 1 in, 1 in, 1 in, 1 in)
FreezeCdcLayer := FreezeLayer("CdcLayer")
LeverArmCHT2_Script := stack(MakeCdcLayer, CHT1, CHT2, LArm1, LArm2, DropTube1, DropTube2, LBracketLA1, LBracketLA2, FreezeCdcLayer)
LeverArmCHT1_Script := stack(MakeCdcLayer, CHT1, LArm1, DropTube1, LBracketLA1, FreezeCdcLayer)
# Connecting bars and Cylinders
ConnectCylinderLayer := layer_new("CdcConnectCylinder", ltgrey)
LarmBar1 := CylinderSUBF([
    LA_Origin[0] + L_LArmBar/2;
    (LA_Origin[1] + L_LArmBar/2) - W_LBracket/2;
    LA_Origin[2] + L_LBracket/2
], R_LArmBar, L_LArmBar, [0; 0]*deg, ["CdcLayer"])
LarmBar2 := CylinderSUBF([
    LA2_Origin[0] + L_LArmBar/2;
    (LA2_Origin[1] + L_LArmBar/2) - W_LBracket/2;
    LA2_Origin[2] + L_LBracket/2
], R_LArmBar, L_LArmBar, [0; 0]*deg, ["CdcLayer"])
ConnectionCylinder2 := CylinderSUBF([LA_Origin[0] + H_LeverArm; LA2_Origin[1] + L_CdcLever - 4*zc; LA_Origin[2] + 4*W_LeverArm], D_Cable, .5*L_CdcLever, [0; 0]*deg, ["CdcLayer"])
FloatCable := CylinderF([LA_Origin[0]; LA_Origin[1] + W_LeverArm/2 + L_CdcLever; Z_FloatTop], D_Cable, L_Cable, [0; 90]*deg)
FreezeConnectCylinderLayer := FreezeLayer("CdcConnectCylinder")
ConnectCyl2_Script := stack(ConnectCylinderLayer, LarmBar1, LarmBar2, ConnectionCylinder2, FloatCable, FreezeConnectCylinderLayer)
ConnectCyl1_Script := stack(ConnectCylinderLayer, LarmBar1, FloatCable, FreezeConnectCylinderLayer)
# Sliders
SliderLayer := layer_new("CdcSliders", dkgrey)
Slider1FirstSide := BoxF(Slider1_Origin, [Slider1_Origin[0] + L_Slider; Slider1_Origin[1] + W_Slider; Slider1_Origin[2] - H_Slider], [90; 0; 0]*deg)
Slider2FirstSide := BoxF(Slider2_Origin, [Slider2_Origin[0] + L_Slider; Slider2_Origin[1] + W_Slider; Slider2_Origin[2] - H_Slider], [90; 0; 0]*deg)
Slider1TopSide := BoxF(Slider1_Origin, [Slider1_Origin[0] + H_Slider; Slider1_Origin[1] + L_Slider; Slider1_Origin[2] - W_Slider], [0; 0; 0]*deg)
Slider2TopSide := BoxF(Slider2_Origin, [Slider2_Origin[0] + H_Slider; Slider2_Origin[1] + L_Slider; Slider2_Origin[2] - W_Slider], [0; 0; 0]*deg)
Slider1SecondSide := BoxF([Slider1_Origin[0] + H_Slider; Slider1_Origin[1]; Slider1_Origin[2]], [
    Slider1_Origin[0] + H_Slider + W_Slider;
    Slider1_Origin[1] + L_Slider;
    Slider1_Origin[2] - H_Slider
], [0; 0; 0]*deg)
Slider2SecondSide := BoxF([Slider2_Origin[0] + H_Slider; Slider2_Origin[1]; Slider2_Origin[2]], [
    Slider2_Origin[0] + H_Slider + W_Slider;
    Slider2_Origin[1] + L_Slider;
    Slider2_Origin[2] - H_Slider
], [0; 0; 0]*deg)
FreezeSliders := FreezeLayer("CdcSliders")
Sliders2_Script := stack(SliderLayer, Slider1FirstSide, Slider2FirstSide, Slider1TopSide, Slider2TopSide, Slider1SecondSide, Slider2SecondSide, FreezeSliders)
Sliders1_Script := stack(SliderLayer, Slider1FirstSide, Slider1TopSide, Slider1SecondSide, FreezeSliders)
# Float!
FloatCapsLayer := layer_new("CdcFloatCapPlu", green)
CdcFloatCapTop := CapF(Float_Origin, [0; -90]*deg, ND_EtFloat)
CdcFloatCapBottom := CapF([Float_Origin[0]; Float_Origin[1]; Float_Origin[2] - L_CdcFloat], [0; 90]*deg, ND_EtFloat)
FreezeFloatCaps := FreezeLayer("CdcFloatCapPlu")
FloatPipeLayer := layer_new("CdcFloatPipePlu", blue)
CdcFloatPipe := PipeF(Float_Origin, L_CdcFloat, [0; -90]*deg, ND_EtFloat, PS_Default)
FreezeFloatPipe := FreezeLayer("CdcFloatPipePlu")
PlumbingLayer := stack(FloatCapsLayer, CdcFloatCapTop, CdcFloatCapBottom, FreezeFloatCaps, FloatPipeLayer, CdcFloatPipe, FreezeFloatPipe)
Cdc2_Script := stack(LeverArmCHT2_Script, ConnectCyl2_Script, Sliders2_Script, PlumbingLayer)
Cdc1_Script := stack(LeverArmCHT1_Script, ConnectCyl1_Script, Sliders1_Script, PlumbingLayer)
# Flexible Tubing (not currently drawn)
FlexConnectLayer := layer_new("CdcFlexConnect", red)
# n.temp specifies number of divisions the parabola will use (5 is a good number, do not exceed 10)
# dir.t specifies the tangency of the inlet and outlet, in the form of a 2-point point array. e.g. (1,0,0),(0,0,-1) is read as inlet facing positive x direction, outlet facing negative z direction
# Cat.Lt is the length of the tube minus the length of the pieces fitted over the couplings
# Inlet and outlet are the inlet and outlet coordinates, corresponding to the center point directly on the end of the coupling.
# ID and OD are inner and outer diameters of pipe, respectively
SweepPoint1 := LA_Origin + [-.0894; -.792; .1092]*m
SweepPoint2 := SweepPoint1 + [1; 0; 0]*in
FlexTubeF(n_temp, dir_t, inlet, outlet, Cat_Lt, ID, OD, LayerName, LayerColor) :=
    PP ← ParPointF(n_temp, dir_t, inlet, outlet, Cat_Lt)
    TP ← TanPoints(n_temp, dir_t, inlet, outlet, Cat_Lt)
    Inner ← FlexCylinderF(n_temp, dir_t, inlet, outlet, Cat_Lt, ID)
    Group ← GroupLast("DeleteMe")
    Layer ← layer_new(LayerName, LayerColor)
    Outer ← FlexCylinderF(n_temp, dir_t, inlet, outlet, Cat_Lt, OD)
    SubtractInner ← SubtractF([LayerName], "DeleteMe")
    Mirror ← concat("mirror", sp, "g", sp, LayerName, sp, sp, "0,0", sp, "0,100", sp, "y")
    Final ← stack(Layer, Outer, FreezeLayer(LayerName), Inner, Group, SubtractInner, layer_thaw(LayerName), Mirror, FreezeLayer(LayerName))
    return Final
SweepPoint5 := CHT_Origin + [.1432; 0; -.0629]*m
SweepPoint4 := SweepPoint5 + [1; 0; 0]*in
SweepPoint3 := [(SweepPoint1[0] + SweepPoint5[0])/2; (SweepPoint1[1] + SweepPoint5[1])/2; SweepPoint1[2] - 50 cm]
SweepPathPoints := [SweepPoint1; SweepPoint2; SweepPoint3; SweepPoint4; SweepPoint5]
FlexTube_Trial := FlexTube(SweepPathPoints, .125 in, .2 in, "CdcFlexConnect", red)
# Insert in stack when flexcylinder fixed
FlexConnectLayer, FlexTube_Trial, FreezeLayer("CdcFlexConnect")
# Flex tube Trial with new code!
# n.temp specifies number of divisions the parabola will use (5 is a good number, do not exceed 10)
# dir.t specifies the tangency of the inlet and outlet, in the form of a 2-point point array. e.g. (1,0,0),(0,0,-1) is read as inlet facing positive x direction, outlet facing negative z direction
# Cat.Lt is the length of the tube minus the length of the pieces fitted over the couplings
# Inlet and outlet are the inlet and outlet coordinates, corresponding to the center point directly on the end of the coupling.
# ID and OD are inner and outer diameters of pipe, respectively
FlexTubeF(n_temp, dir_t, inlet, outlet, Cat_Lt, ID, OD, LayerName, LayerColor) :=
    PP ← ParPointF(n_temp, dir_t, inlet, outlet, Cat_Lt)
    TP ← TanPoints(n_temp, dir_t, inlet, outlet, Cat_Lt)
    Inner ← FlexCylinderF(n_temp, dir_t, inlet, outlet, Cat_Lt, ID)
    Group ← GroupLast("DeleteMe")
    Layer ← layer_new(LayerName, LayerColor)
    Outer ← FlexCylinderF(n_temp, dir_t, inlet, outlet, Cat_Lt, OD)
    SubtractInner ← SubtractF([LayerName], "DeleteMe")
    Mirror ← concat("mirror", sp, "g", sp, LayerName, sp, sp, "0,0", sp, "0,100", sp, "y")
    Final ← stack(Layer, Outer, FreezeLayer(LayerName), Inner, Group, SubtractInner, layer_thaw(LayerName), Mirror, FreezeLayer(LayerName))
    return Final
FlexConnectLayer := layer_new("CdcFlexConnect", red)
NewTube := FlexTubeF(5, [-1, 0; 0, 1; 0, 0], LA_Origin, CHT_Origin, 1.5 m, 1 in, 1 in, "CdcFlexConnect", red)
FlexConnectLayer, NewTube, FreezeLayer("CdcFlexConnect")
# Calibration Column Definitions
SF_CalCol := 1.25
Ti_Res := 1.25*min
H_CalCol := 30 cm
Q_CoagCalColMax := SF_CalCol*Q_CoagStock
Vol_CoagCalCol := Ti_Res*Q_CoagCalColMax
D_inCoagCCMin := sqrt(4*Vol_CoagCalCol/(π*H_CalCol)) = 4.57916 in
ND_CoagCalCol := NominalDiameter(D_inCoagCCMin, PS_Default)
D_inCoagCalCol := innerdiameter(ND_CoagCalCol, PS_Default) = 6.083 in
Q_ChlorCalColMax := SF_CalCol*Q_ChlorineStock
Vol_ChlorCalCol := Ti_Res*Q_ChlorCalColMax
D_inChlorCCMin := sqrt(4*Vol_ChlorCalCol/(π*H_CalCol)) = 2.64378 in
ND_ChlorCalCol := NominalDiameter(D_inChlorCCMin, PS_Default)
D_inChlorCalCol := innerdiameter(ND_ChlorCalCol, PS_Default) = 3.21 in
Q_FCCalColMax := SF_CalCol*Q_FiCoagStock
Vol_FCCalCol := Ti_Res*Q_FCCalColMax
D_inFCCCMin := sqrt(4*Vol_FCCalCol/(π*H_CalCol)) = 0.396567 in
ND_FCCalCol := NominalDiameter(D_inFCCCMin, PS_Default)
D_inFCCalCol := innerdiameter(ND_FCCalCol, PS_Default) = 1.175 in
R_Cylinder := .5 cm
# Calibration Column Origin Points
CoagCalCol_Origin := [
    ChemPlatform_Origin[0] + 1/2*L_EtChemPlatform;
    ChemPlatform_Origin[1] - ConRadius(ND_CoagCalCol);
    Z_CoagulantOutlet
]
CoagTopCap_Origin := [CoagCalCol_Origin[0]; CoagCalCol_Origin[1]; CoagCalCol_Origin[2] + H_CalCol]
ChlorCalCol_Origin := [
    ChemPlatform_Origin[0] + 1/2*L_EtChemPlatform - ConRadius(ND_CoagCalCol) - ConRadius(ND_ChlorCalCol) - 2*zc;
    ChemPlatform_Origin[1] - ConRadius(ND_CoagCalCol) - 2*zc;
    Z_CoagulantOutlet
]
ChlorTopCap_Origin := [ChlorCalCol_Origin[0]; ChlorCalCol_Origin[1]; ChlorCalCol_Origin[2] + H_CalCol]
# To draw the hole in the top cap, we are subtracting a cylinder from the top cap layer
CoagCylinder_Origin := [CoagCalCol_Origin[0]; CoagCalCol_Origin[1]; CoagCalCol_Origin[2] + H_CalCol/2]
ChlorCylinder_Origin := [ChlorCalCol_Origin[0]; ChlorCalCol_Origin[1]; ChlorCalCol_Origin[2] + H_CalCol/2]
# Calibration Column
MakeCalColLayer := layer_new("CdcCalColumnPlu", ltpurple)
MainCoagCalCol := PipeF(CoagCalCol_Origin, H_CalCol, [0; 90]*deg, ND_CoagCalCol, PS_Default)
MainChlorCalCol := PipeF(ChlorCalCol_Origin, H_CalCol, [0; 90]*deg, ND_ChlorCalCol, PS_Default)
FreezeCalCol := FreezeLayer("CdcCalColumnPlu")
MakeCapsLayer := layer_new("CdcColumnCapsPlu", blue2)
CoagTopCap := CapF(CoagTopCap_Origin, [0; -90]*deg, ND_CoagCalCol)
CoagBottomCap := CapF(CoagTopCap_Origin - [0 m; 0 m; H_CalCol], [0; 90]*deg, ND_CoagCalCol)
ChlorTopCap := CapF(ChlorTopCap_Origin, [0; -90]*deg, ND_ChlorCalCol)
ChlorBottomCap := CapF(ChlorTopCap_Origin - [0 m; 0 m; H_CalCol], [0; 90]*deg, ND_ChlorCalCol)
FreezeCapsLayer := FreezeLayer("CdcColumnCapsPlu")
DrawCoagCylinder := CylinderF(CoagCylinder_Origin, R_Cylinder, H_CalCol, [0; 90]*deg)
DrawChlorCylinder := CylinderF(ChlorCylinder_Origin, R_Cylinder, H_CalCol, [0; 90]*deg)
LayCylinder := GroupAll("DeleteMe")
MakeHole := SubtractF(["CdcColumnCapsPlu"], "DeleteMe")
LayStand := layer_new("CdcCalColumnStand", yellow)
BoardDim_Vert := [
    2*ConRadius(ND_CoagCalCol) + 2*ConRadius(ND_ChlorCalCol) + 4*zc;
    1.5*in;
    H_CalCol + Z_CoagulantOutlet - (ChemPlatform_Origin[2] + ChemPlatform_Dimensions[2])
]
BoardDim_Horiz := [BoardDim_Vert[0]; BoardDim_Vert[2]/(2*tan(60*deg)); 1.5*in]
CoagCalCol_Origin[0] - ConRadius(ND_CoagCalCol)
VertBoard_Origin := [
    CoagCalCol_Origin[0] - ConRadius(ND_CoagCalCol) - 2*ConRadius(ND_ChlorCalCol) - 2*zc;
    CoagCalCol_Origin[1] + ConRadius(ND_CoagCalCol);
    ChemPlatform_Origin[2] + ChemPlatform_Dimensions[2]
]
FarCorner_VertBoard := BoardDim_Vert + VertBoard_Origin
HorizBoard_Origin := VertBoard_Origin + [0; BoardDim_Vert[1]; 0]
FarCorner_HorizBoard := BoardDim_Horiz + HorizBoard_Origin
BoardDim_Slant := [BoardDim_Vert[0]; 1.5 in; BoardDim_Vert[2]/(2*sin(60 deg))]
SlantBoard_Origin := FarCorner_HorizBoard
FarCorner_SlantBoard := SlantBoard_Origin + [-BoardDim_Slant[0]; -BoardDim_Slant[1]; BoardDim_Slant[2]]
MakeSlantBoard := BoxF(SlantBoard_Origin, FarCorner_SlantBoard, [0; 0; 30]*deg)
MakeVertBoard := BoxF(VertBoard_Origin, FarCorner_VertBoard, [0; 0; 0])
MakeHorizBoard := BoxF(HorizBoard_Origin, FarCorner_HorizBoard, [0; 0; 0])
RotateSupport := Rotate_All(VertBoard_Origin, 90 deg)
MoveSupport := MoveAll(VertBoard_Origin, VertBoard_Origin - [0 m; 2*ConRadius(ND_CoagCalCol); 0 m])
FreezeBoards := FreezeLayer("CdcCalColumnStand")
CdcCalColumn2_Script := stack(MakeCalColLayer, MainCoagCalCol, MainChlorCalCol, FreezeCalCol, MakeCapsLayer, CoagTopCap, CoagBottomCap, ChlorTopCap, ChlorBottomCap, FreezeCapsLayer, DrawChlorCylinder, LayCylinder, MakeHole, LayStand, MakeSlantBoard, MakeVertBoard, MakeHorizBoard, FreezeBoards)
CdcCalColumn1_Script := stack(MakeCalColLayer, MainChlorCalCol, FreezeCalCol, MakeCapsLayer, ChlorTopCap, ChlorBottomCap, FreezeCapsLayer, DrawChlorCylinder, LayCylinder, MakeHole, LayStand, MakeSlantBoard, MakeVertBoard, MakeHorizBoard, RotateSupport, MoveSupport, FreezeBoards)
AC_Cdc2 := stack(Cdc2_Script, CdcCalColumn2_Script)
AC_Cdc1 := stack(Cdc1_Script, CdcCalColumn1_Script)
AC_Cdc := AC_Cdc2
