# Width and length of the chemical platform are defined in ChemStockTanksAC
ChemPlatform_Origin := [
    CoagTank_Origin[0] + R_CoagTank + T_ChemTankWall + S_ChemTankBorder - L_EtChemPlatform;
    Et_Origin[1] + W_Et + T_PlantWall - W_EtChemPlatform;
    CoagTank_Origin[2] - T_ChemTankWall - T_PlantWall
]
ChemPlatform_Dimensions := [L_EtChemPlatform; W_EtChemPlatform; T_PlantWall]
# Chemical Dose Controller
# Chemical Dose Controller
L_CdcLever := 0.45 m  # assumed from Drew's drawing for now
W_LeverArm := 0.0032 m
D_LATeetoLAOrigin := 0.0079 m
L_CdcFloat := 2*(CapHeight(ND_EtFloat) - CapThickness(ND_EtFloat)) + 1 in  # Length of the float pipe must fill both caps plus some.
D_CdcCht := 6 in
Z_FloatTop := ZW_Et - HL_Flowmeasure + 1/2*L_CdcFloat  # The elevation of the float with the center of the float being at the bottom row of orifices of the LFOM.
D_LeverOrigintoArm := 0.0336 m  # Distance from the lever arm origin (which is on the tee holding the lever arm up) to the lever arm
H_LeverHole := 0.0312 m - 0.0095/2*m
# Distance from the top of the entrance tank to the to the middle of the lever arm hole for the cable - (minus the) radius of the hole
D_Cable := 0.1 in
L_Cable := Z_EtTop + H_LeverHole - Z_FloatTop
D_LABracketOrigintoEndBracket := 0.0079 m
# This is the distance from the lever arm bracket origin (at the center of the hole of the bracket holding up the lever arm) to the end of the bracket
D_LeverHole := 0.0063 m  # Distance from the float end of the lever arm to the middle of the hole where the float cable will be attached.
D_LABOrigintoLAOriginX := 0.032 m
D_LABOrigintoLAOriginZ := 0.0254 m  # Edited DLABOrigintoLAOriginZ to accmodate dimensions from McMaster vs Inserted Drawing
# these axes assume the lever arm is oriented along the y-axis
# but we are now rotating it!!!
T_CdcDt := 0.003 m  # Thickness of the drop tube
L_LAOriginToDtX := 0.0290 m  # Distance from the lever arm origin to the center of the drop tube in the x direction
L_LAOriginToDtY := 0.7812 m  # Distance from the lever arm origin to the outside center of the top part of the drop tube in the y direction
L_LAOriginToDtZ := 0.0429 m  # Distance from the lever arm origin to the drop tube in the z direction
L_LAOriginToDtCenterX := 0.0290 m  # Distance from the lever arm origin to the center of the drop tube in the x direction
T_CdcReducer := 0.0095 m  # Measured from CDC research team's apparatus
L_LAOriginToReducerX := 0.0290 m  # Distance from the lever arm origin to the center of the reducer in the x direction
L_LAOriginToReducerY := 0.7315 m  # Distance from the lever arm origin to the outside center of the top part of the reducer in the y direction
L_LAOriginToReducerZ := 0.1094 m  # Distance from the lever arm origin to the center of the large part of the reducer in the z direction
L_LAOriginToReducerCenterX := 0.0290 m  # Distance from the lever arm origin to the center of the reducer in the x direction
L_LAOriginToReducerCenterY := 0.7919 m  # Distance from the lever arm origin to the center of the reducer in the y direction
L_LAOriginToDtX2 := 0.0396 m
L_LAOriginToDtY2 := 0.7919 m
LA_Origin := [
    Et_Origin[0] - L_Et - T_PlantWall;
    Et_Origin[1] + ConRadius(ND_EtFloat) + S_EtFloat/2;
    Z_EtTop + D_LABOrigintoLAOriginZ
]
LA2_Origin := [LA_Origin[0]; LA_Origin[1] - ConRadius(ND_EtFloat) - S_EtFloat/2; LA_Origin[2]]
LA3_Origin := [LA_Origin[0]; LA_Origin[1] + ConRadius(ND_EtFloat) + S_EtFloat/2; LA_Origin[2]]
L_LAOriginToReducerX2 := 0.0893 m
L_LAOriginToReducerY2 := 0.7919 m
LADtFitting_Origin := [-L_LAOriginToDtY - T_CdcDt + L_CdcLever/2; L_LAOriginToDtX; L_LAOriginToDtZ] + LA_Origin
# need to edit fitting origin to follow new LAorign
LAReducerFitting_Origin := [-L_LAOriginToReducerY - T_CdcReducer + L_CdcLever/2; L_LAOriginToReducerX; L_LAOriginToReducerZ] + LA_Origin
LADt_Center := [-L_LAOriginToReducerCenterY; L_LAOriginToDtCenterX; L_LAOriginToDtZ] + LA_Origin
LAReducer_Center := LA_Origin + [-L_LAOriginToReducerCenterY; L_LAOriginToReducerCenterX; L_LAOriginToReducerZ]
# Defines the center of the reducer. (The center in the z direction is the center of the larger part of the reducer).
CHT_Origin := [
    Et_Origin[0] - L_Et - L_ChemTankShift - T_PlantWall + D_CdcCht/2;
    LA_Origin[1];
    Z_CdcFloatValveOrifice
]
LA2DtFitting_Origin := [-L_LAOriginToDtY - T_CdcDt + L_CdcLever/2; L_LAOriginToDtX; L_LAOriginToDtZ] + LA2_Origin
LA2ReducerFitting_Origin := [-L_LAOriginToReducerY - T_CdcReducer + L_CdcLever/2; L_LAOriginToReducerX; L_LAOriginToReducerZ] + LA2_Origin
LA2Dt_Center := [-L_LAOriginToReducerCenterY; L_LAOriginToDtCenterX; L_LAOriginToDtZ] + LA2_Origin
D_CdcCht
LA2Reducer_Center := LA2_Origin + [-L_LAOriginToReducerCenterY; L_LAOriginToReducerCenterX; L_LAOriginToReducerZ]
# will need to modify the y component of the origin since the constant head tanks will need to be offset more than the lever arms.
CHT2_Origin := [CHT_Origin[0]; CHT_Origin[1] - 2*D_CdcCht; CHT_Origin[2]]
LA3DtFitting_Origin := [-L_LAOriginToDtY - T_CdcDt + L_CdcLever/2; L_LAOriginToDtX; L_LAOriginToDtZ] + LA3_Origin
LA3ReducerFitting_Origin := [-L_LAOriginToReducerY - T_CdcReducer + L_CdcLever/2; L_LAOriginToReducerX; L_LAOriginToReducerZ] + LA3_Origin
LA3Dt_Center := [-L_LAOriginToReducerCenterY; L_LAOriginToDtCenterX; L_LAOriginToDtZ] + LA3_Origin
LA3Reducer_Center := LA3_Origin + [-L_LAOriginToReducerCenterY; L_LAOriginToReducerCenterX; L_LAOriginToReducerZ]
CHT3_Origin := [CHT_Origin[0]; CHT_Origin[1] + 2*D_CdcCht; CHT_Origin[2]]
# CDC Script
CdcLayer := layer_new("Cdc", ltpurple)
R_LArmBar := 3/16*in
D_LArmBar := 3/8*in
W_LBracket := 5/8*in
L_LBracket := 2 in
T_LBracket := .08 in
L_LArmBar := 4 in
H_LeverArm := 0.0254 m
W_LeverArm = 0.0032 m
ND_DropTube := 1/2*in
L_DropTube := .61 m
LArm1 := BoxF([LA_Origin[0] - L_CdcLever; LA_Origin[1] + 1/8*in; LA_Origin[2]], [LA_Origin[0] + L_CdcLever; LA_Origin[1]; LA_Origin[2] + H_LeverArm], [0; 0; 0]*deg)
DropTube1 := PipeF([
    LA_Origin[0] + L_CdcLever - L_LAOriginToDtY;
    LA_Origin[1] + 1/8*in + L_LAOriginToDtCenterX;
    LA_Origin[2] + L_LAOriginToDtZ
], L_DropTube, [0; -90]*deg, ND_DropTube, PS_Modules)
LarmBar1 := CylinderF([
    LA_Origin[0] + W_LBracket/2;
    LA_Origin[1] - T_LBracket + L_LArmBar/2;
    LA_Origin[2] + L_LBracket/2 - L_LBracket/8
], R_LArmBar, L_LArmBar, [90; 0]*deg)
LBracketLA1 := LBracket2F([LA_Origin[0]; LA_Origin[1] - L_LArmBar/2 + zc; LA_Origin[2] - L_LBracket + W_LBracket + D_LArmBar])
InsertCht := insertdwg("https://confluence.cornell.edu/download/attachments/173604905/CdcCht.dwg", CHT_Origin, 1, 1, 90 deg)
LArm2 := BoxF([LA2_Origin[0] - L_CdcLever; LA2_Origin[1] + 1/8*in; LA2_Origin[2]], [LA2_Origin[0] + L_CdcLever; LA2_Origin[1]; LA2_Origin[2] + H_LeverArm], [0; 0; 0]*deg)
DropTube2 := PipeF([
    LA2_Origin[0] + L_CdcLever - L_LAOriginToDtY;
    LA2_Origin[1] + 1/8*in + L_LAOriginToDtCenterX;
    LA2_Origin[2] + L_LAOriginToDtZ
], L_DropTube, [0; -90]*deg, ND_DropTube, PS_Modules)
LarmBar2 := CylinderF([
    LA2_Origin[0] + W_LBracket/2;
    LA2_Origin[1] - T_LBracket + L_LArmBar/2;
    LA2_Origin[2] + L_LBracket/2 - L_LBracket/8
], R_LArmBar, L_LArmBar, [90; 0]*deg)
LBracketLA2 := LBracket2F([
    LA2_Origin[0];
    LA2_Origin[1] - L_LArmBar/2 + zc;
    LA2_Origin[2] - L_LBracket + W_LBracket + D_LArmBar
])
InsertCht2 := insertdwg("https://confluence.cornell.edu/download/attachments/173604905/CdcCht.dwg", CHT2_Origin, 1, 1, 90 deg)
LArm3 := BoxF([LA3_Origin[0] - L_CdcLever; LA3_Origin[1] + 1/8*in; LA3_Origin[2]], [LA3_Origin[0] + L_CdcLever; LA3_Origin[1]; LA3_Origin[2] + H_LeverArm], [0; 0; 0]*deg)
DropTube3 := PipeF([
    LA3_Origin[0] + L_CdcLever - L_LAOriginToDtY;
    LA3_Origin[1] + 1/8*in + L_LAOriginToDtCenterX;
    LA3_Origin[2] + L_LAOriginToDtZ
], L_DropTube, [0; -90]*deg, ND_DropTube, PS_Modules)
LarmBar3 := CylinderF([
    LA3_Origin[0] + W_LBracket/2;
    LA3_Origin[1] - T_LBracket + L_LArmBar/2;
    LA3_Origin[2] + L_LBracket/2 - L_LBracket/8
], R_LArmBar, L_LArmBar, [90; 0]*deg)
LBracketLA3 := LBracket2F([
    LA3_Origin[0];
    LA3_Origin[1] - L_LArmBar/2 + zc;
    LA3_Origin[2] - L_LBracket + W_LBracket + D_LArmBar
])
InsertCht3 := insertdwg("https://confluence.cornell.edu/download/attachments/173604905/CdcCht.dwg", CHT3_Origin, 1, 1, 90 deg)
ConnectionCylinder := CylinderF([
    LA_Origin[0] - L_CdcLever/4 + L_CdcLever/2;
    LA2_Origin[1] - 3*W_LeverArm;
    LA_Origin[2] + 4*W_LeverArm
], D_Cable, LA3_Origin[1] - LA2_Origin[1] + 6*W_LeverArm, [270; 0]*deg)
FloatCable := CylinderF([
    Et_Origin[0] - L_Et - T_PlantWall + D_LATeetoLAOrigin + L_CdcFloatArm - D_LeverHole;
    LA_Origin[1] + W_LeverArm/2;
    Z_FloatTop
], D_Cable, L_Cable, [0; 90]*deg)
FreezeCdc := FreezeLayer("Cdc")
FloatCapsLayer := layer_new("CdcFloatCapPlu", green)
CdcFloatCapTop := CapF([
    Et_Origin[0] - L_Et - T_PlantWall + D_LATeetoLAOrigin + L_CdcFloatArm - D_LeverHole;
    LA_Origin[1] + W_LeverArm/2;
    Z_FloatTop - CapThickness(ND_EtFloat)
], [0; -90]*deg, ND_EtFloat)
CdcFloatCapBottom := CapF([
    Et_Origin[0] - L_Et - T_PlantWall + D_LATeetoLAOrigin + L_CdcFloatArm - D_LeverHole;
    LA_Origin[1] + W_LeverArm/2;
    Z_FloatTop - CapThickness(ND_EtFloat) - L_CdcFloat
], [0; 90]*deg, ND_EtFloat)
FloatPipeLayer := layer_new("CdcFloatPipePlu", blue)
CdcFloatPipe := PipeF([
    Et_Origin[0] - L_Et - T_PlantWall + D_LATeetoLAOrigin + L_CdcFloatArm - D_LeverHole;
    LA_Origin[1];
    Z_FloatTop - CapThickness(ND_EtFloat)
], L_CdcFloat, [0; -90]*deg, ND_EtFloat, PS_Default)
Cdc_Script := stack(CdcLayer, LBracketLA1, LArm1, DropTube1, LarmBar1, InsertCht, LBracketLA2, LArm2, DropTube2, LarmBar2, InsertCht2, LBracketLA3, LArm3, DropTube3, LarmBar3, InsertCht3, ConnectionCylinder, FloatCable, FreezeCdc, FloatCapsLayer, CdcFloatCapTop, CdcFloatCapBottom, FreezeLayer("CdcFloatCapPlu"), FloatPipeLayer, CdcFloatPipe, FreezeLayer("CdcFloatPipePlu"))
OD_CdcFitting := 5/32*in  # Outer diameter of fitting- measured from CDC research team's fitting
ID_CdcFitting := 0.126 in  # Inner diameter of fitting- measured from CDC research team's fitting
L_CdcFitting := 0.75 in  # Length of fitting - measured from CDC research team's fitting
CdcFittingsLayer := layer_new("CdcFittings", dkgrey)
CdcFittingOuter :=
    CylinderF(LADtFitting_Origin, OD_CdcFitting/2, L_CdcFitting, [180; 0]*deg) if N_FiCoagCdcTubes ≤ 3
    CylinderF(LAReducerFitting_Origin, OD_CdcFitting/2, L_CdcFitting, [180; 0]*deg) otherwise
CdcFittingOuter_Array :=
    ArrayLastPolar(LADt_Center, N_CoagCdcTubes, 180 deg) if N_FiCoagCdcTubes ≤ 3
    ArrayLastPolar(LAReducer_Center, N_CoagCdcTubes, 180 deg) otherwise
CdcFittingOuter2 :=
    CylinderF(LA2DtFitting_Origin, OD_CdcFitting/2, L_CdcFitting, [180; 0]*deg) if N_CoagCdcTubes ≤ 3
    CylinderF(LA2ReducerFitting_Origin, OD_CdcFitting/2, L_CdcFitting, [180; 0]*deg) otherwise
CdcFittingOuter2_Array :=
    ArrayLastPolar(LA2Dt_Center, N_FiCoagCdcTubes, 180 deg) if N_CoagCdcTubes ≤ 3
    ArrayLastPolar(LA2Reducer_Center, N_FiCoagCdcTubes, 180 deg) otherwise
CdcFittingOuter3 :=
    CylinderF(LA3DtFitting_Origin, OD_CdcFitting/2, L_CdcFitting, [180; 0]*deg) if N_ChlorCdcTubes ≤ 3
    CylinderF(LA3ReducerFitting_Origin, OD_CdcFitting/2, L_CdcFitting, [180; 0]*deg) otherwise
CdcFittingOuter3_Array :=
    ArrayLastPolar(LA3Dt_Center, N_ChlorCdcTubes, 180 deg) if N_ChlorCdcTubes ≤ 3
    ArrayLastPolar(LA3Reducer_Center, N_ChlorCdcTubes, 180 deg) otherwise
FreezeCdcFittings := FreezeLayer("CdcFittings")
CdcFittingInner :=
    CylinderF(LADtFitting_Origin, ID_CdcFitting/2, L_CdcFitting, [180; 0]*deg) if N_FiCoagCdcTubes ≤ 3
    CylinderF(LAReducerFitting_Origin, ID_CdcFitting/2, L_CdcFitting, [180; 0]*deg) otherwise
CdcFittingInner_Array :=
    ArrayLastPolar(LADt_Center, N_CoagCdcTubes, 180 deg) if N_FiCoagCdcTubes ≤ 3
    ArrayLastPolar(LAReducer_Center, N_CoagCdcTubes, 180 deg) otherwise
CdcFittingInner2 :=
    CylinderF(LA2DtFitting_Origin, ID_CdcFitting/2, L_CdcFitting, [180; 0]*deg) if N_CoagCdcTubes ≤ 3
    CylinderF(LA2ReducerFitting_Origin, ID_CdcFitting/2, L_CdcFitting, [180; 0]*deg) otherwise
CdcFittingInner2_Array :=
    ArrayLastPolar(LA2Dt_Center, N_CoagCdcTubes, 180 deg) if N_CoagCdcTubes ≤ 3
    ArrayLastPolar(LA2Reducer_Center, N_CoagCdcTubes, 180 deg) otherwise
CdcFittingInner3 :=
    CylinderF(LA3DtFitting_Origin, ID_CdcFitting/2, L_CdcFitting, [180; 0]*deg) if N_ChlorCdcTubes ≤ 3
    CylinderF(LA3ReducerFitting_Origin, ID_CdcFitting/2, L_CdcFitting, [180; 0]*deg) otherwise
CdcFittingInner3_Array :=
    ArrayLastPolar(LA3Dt_Center, N_ChlorCdcTubes, 180 deg) if N_ChlorCdcTubes ≤ 3
    ArrayLastPolar(LA3Reducer_Center, N_ChlorCdcTubes, 180 deg) otherwise
GroupFitting := GroupAll("DeleteMe")
SubtractFittingInner := SubtractF(["CdcFittings"], "DeleteMe")
FreezeCdcFittings := FreezeLayer("CdcFittings")
FlexConnectLayer := layer_new("FlexConnect", red)
SweepPoint1 := LA_Origin + [-.0894; -.792; .1092]*m
SweepPoint2 := SweepPoint1 + [1; 0; 0]*in
SweepPoint5 := CHT_Origin + [.1432; 0; -.0629]*m
SweepPoint4 := SweepPoint5 + [1; 0; 0]*in
SweepPoint3 := [(SweepPoint1[0] + SweepPoint5[0])/2; (SweepPoint1[1] + SweepPoint5[1])/2; SweepPoint1[2] - 50 cm]
SweepPathPoints := [SweepPoint1; SweepPoint2; SweepPoint3; SweepPoint4; SweepPoint5]
FlexTube_Trial := FlexTube(SweepPathPoints, .125 in, .2 in, "FlexConnect", red)
# Insert in stack when flexcylinder fixed
FlexConnectLayer, FlexTube_Trial, FreezeLayer("FlexConnect")
CdcFittings_Script := stack(CdcFittingsLayer, CdcFittingOuter, CdcFittingOuter_Array, FreezeCdcFittings, CdcFittingInner, CdcFittingInner_Array, GroupFitting, SubtractFittingInner)
# CDC Calibration Column
SF_CalCol := 1.25
Ti_Res := 1.25*min
H_CalCol := 30 cm
Q_CoagCalColMax := SF_CalCol*Q_CoagStock
Vol_CoagCalCol := Ti_Res*Q_CoagCalColMax
D_inCoagCCMin := sqrt(4*Vol_CoagCalCol/(π*H_CalCol))
ND_CoagCalCol := NominalDiameter(D_inCoagCCMin, PS_Default)
D_inCoagCalCol := innerdiameter(ND_CoagCalCol, PS_Default)
Q_ChlorCalColMax := SF_CalCol*Q_ChlorStock
Vol_ChlorCalCol := Ti_Res*Q_ChlorCalColMax
D_inChlorCCMin := sqrt(4*Vol_ChlorCalCol/(π*H_CalCol))
ND_ChlorCalCol := NominalDiameter(D_inChlorCCMin, PS_Default)
D_inChlorCalCol := innerdiameter(ND_ChlorCalCol, PS_Default)
Q_FCCalColMax := SF_CalCol*Q_FiCoagStock
Vol_FCCalCol := Ti_Res*Q_FCCalColMax
D_inFCCCMin := sqrt(4*Vol_FCCalCol/(π*H_CalCol))
ND_FCCalCol := NominalDiameter(D_inFCCCMin, PS_Default)
D_inFCCalCol := innerdiameter(ND_FCCalCol, PS_Default)
CalCol_Origin := [
    ChemPlatform_Origin[0] + L_EtChemPlatform + ConRadius(ND_FCCalCol);
    CoagTank_Origin[1] + R_CoagTank + T_ChemTankWall + S_ChemTankBorder - 0.5*W_EtChemPlatform;
    Z_CoagulantOutlet
]
TopCap_Origin := [CalCol_Origin[0]; CalCol_Origin[1]; CalCol_Origin[2] + H_CalCol]
CoagCalCol_Origin := [
    CalCol_Origin[0] - ConRadius(ND_FCCalCol) + ConRadius(ND_CoagCalCol);
    CalCol_Origin[1] - ConRadius(ND_CoagCalCol) - ConRadius(ND_FCCalCol) - 2*zc;
    Z_CoagulantOutlet
]
CoagTopCap_Origin := [CoagCalCol_Origin[0]; CoagCalCol_Origin[1]; CoagCalCol_Origin[2] + H_CalCol]
ChlorCalCol_Origin := [
    CalCol_Origin[0] - ConRadius(ND_FCCalCol) + ConRadius(ND_ChlorCalCol);
    CalCol_Origin[1] + ConRadius(ND_FCCalCol) + ConRadius(ND_ChlorCalCol) + 2*zc;
    Z_CoagulantOutlet
]
ChlorTopCap_Origin := [ChlorCalCol_Origin[0]; ChlorCalCol_Origin[1]; ChlorCalCol_Origin[2] + H_CalCol]
MakeCalColLayer := layer_new("CdcCalColumnPlu", ltpurple)
MainFCCalCol := PipeF(CalCol_Origin, H_CalCol, [0; 90]*deg, ND_FCCalCol, PS_Default)
MainCoagCalCol := PipeF(CoagCalCol_Origin, H_CalCol, [0; 90]*deg, ND_CoagCalCol, PS_Default)
MainChlorCalCol := PipeF(ChlorCalCol_Origin, H_CalCol, [0; 90]*deg, ND_ChlorCalCol, PS_Default)
FreezeCalCol := FreezeLayer("CdcCalColumnPlu")
MakeCapsLayer := layer_new("CdcColumnCapsPlu", blue2)
TopCap := CapF(TopCap_Origin, [0; -90]*deg, ND_FCCalCol)
BottomCap := CapF(TopCap_Origin - [0 m; 0 m; H_CalCol], [0; 90]*deg, ND_FCCalCol)
CoagTopCap := CapF(CoagTopCap_Origin, [0; -90]*deg, ND_CoagCalCol)
CoagBottomCap := CapF(CoagTopCap_Origin - [0 m; 0 m; H_CalCol], [0; 90]*deg, ND_CoagCalCol)
ChlorTopCap := CapF(ChlorTopCap_Origin, [0; -90]*deg, ND_ChlorCalCol)
ChlorBottomCap := CapF(ChlorTopCap_Origin - [0 m; 0 m; H_CalCol], [0; 90]*deg, ND_ChlorCalCol)
FreezeCapsLayer := FreezeLayer("CdcColumnCapsPlu")
# To draw the hole in the top cap, we are subtracting a cylinder from the top cap layer
Cylinder_Origin := [CalCol_Origin[0]; CalCol_Origin[1]; CalCol_Origin[2] + H_CalCol/2]
CoagCylinder_Origin := [CoagCalCol_Origin[0]; CoagCalCol_Origin[1]; CoagCalCol_Origin[2] + H_CalCol/2]
ChlorCylinder_Origin := [ChlorCalCol_Origin[0]; ChlorCalCol_Origin[1]; ChlorCalCol_Origin[2] + H_CalCol/2]
R_Cylinder := .5 cm
DrawCylinder := CylinderF(Cylinder_Origin, R_Cylinder, H_CalCol, [0; 90]*deg)
DrawCoagCylinder := CylinderF(CoagCylinder_Origin, R_Cylinder, H_CalCol, [0; 90]*deg)
DrawChlorCylinder := CylinderF(ChlorCylinder_Origin, R_Cylinder, H_CalCol, [0; 90]*deg)
LayCylinder := GroupAll("DeleteMe")
MakeHole := SubtractF(["CdcColumnCapsPlu"], "DeleteMe")
LayStand := layer_new("CdcCalColumnStand", yellow)
BoardDim_Vert := [
    2*ConRadius(ND_CoagCalCol) + 2*ConRadius(ND_FCCalCol) + 2*ConRadius(ND_ChlorCalCol) + 4*zc;
    1.5*in;
    H_CalCol + Z_CoagulantOutlet - (ChemPlatform_Origin[2] + ChemPlatform_Dimensions[2])
]
VertBoard_Origin := [
    CoagCalCol_Origin[0] - ConRadius(ND_CoagCalCol);
    CoagCalCol_Origin[1] + ConRadius(ND_CoagCalCol);
    ChemPlatform_Origin[2] + ChemPlatform_Dimensions[2]
]
FarCorner_VertBoard := BoardDim_Vert + VertBoard_Origin
BoardDim_Horiz := [BoardDim_Vert[0]; BoardDim_Vert[2]/(2*tan(60*deg)); 1.5*in]
HorizBoard_Origin := VertBoard_Origin + [0; BoardDim_Vert[1]; 0]
FarCorner_HorizBoard := BoardDim_Horiz + HorizBoard_Origin
BoardDim_Slant := [BoardDim_Vert[0]; 1.5 in; BoardDim_Vert[2]/(2*sin(60 deg))]
SlantBoard_Origin := FarCorner_HorizBoard
FarCorner_SlantBoard := SlantBoard_Origin + [-BoardDim_Slant[0]; -BoardDim_Slant[1]; BoardDim_Slant[2]]
MakeSlantBoard := BoxF(SlantBoard_Origin, FarCorner_SlantBoard, [0; 0; 30]*deg)
MakeVertBoard := BoxF(VertBoard_Origin, FarCorner_VertBoard, [0; 0; 0])
MakeHorizBoard := BoxF(HorizBoard_Origin, FarCorner_HorizBoard, [0; 0; 0])
RotateSupport := Rotate_All(VertBoard_Origin, 90 deg)
MoveSupport := MoveAll(VertBoard_Origin, VertBoard_Origin - [0 m; 2*ConRadius(ND_CoagCalCol); 0 m])
FreezeBoards := FreezeLayer("CdcCalColumnStand")
CdcCalColumn_Script := stack(MakeCalColLayer, MainFCCalCol, MainCoagCalCol, MainChlorCalCol, FreezeCalCol, MakeCapsLayer, TopCap, BottomCap, CoagTopCap, CoagBottomCap, ChlorTopCap, ChlorBottomCap, FreezeCapsLayer, DrawCylinder, DrawCoagCylinder, DrawChlorCylinder, LayCylinder, MakeHole, LayStand, MakeSlantBoard, MakeVertBoard, MakeHorizBoard, RotateSupport, MoveSupport, FreezeBoards)
AC_Cdc := stack(Cdc_Script, CdcFittings_Script, CdcCalColumn_Script)
