# Chemical Stock Tank AutoCAD Scripts
# Length Assignments
ND_CoagPiping := 1/2*in
R_TankOutlet := .75 in
L_FirstPipe := 1.5*T_PlantWall  # Length of the first pipe is defined as the width of the platform on which the tanks sit.
L_SecondPipe := .1 m
L_ThirdPipe := .1 m
L_FourthPipe := 3/2*R_CoagTank - TeeLength(ND_CoagPiping)/2 - ElbowRadius(ND_CoagPiping)
L_FinalPipe := .1 m
L_BulkheadFittingEnd := (.35*3/250)*in
L_BallValve := 3/250*in
# can we eventually get a diagram in here showing which pipe is first, second, etc?
L_MaleInsertEnd := 3/4*3/250*in
# Origin Points
CoagTank_Origin := [
    Et_Origin[0] - L_Et - 2*R_CoagTank - T_PlantWall - T_ChemTankWall;
    Et_Origin[1] + R_CoagTank + T_ChemTankWall;
    Z_CoagulantTankBottom
]
CoagOutlet_Origin := [CoagTank_Origin[0]; CoagTank_Origin[1] - R_CoagTank - 2*T_ChemTankWall; Z_CoagulantOutlet]
CoagBulkheadFitting_Origin := [CoagTank_Origin[0]; CoagTank_Origin[1] - R_CoagTank - T_ChemTankWall; Z_CoagulantOutlet]
CoagMaleInsert_Origin := [CoagOutlet_Origin[0]; CoagOutlet_Origin[1] - L_BulkheadFittingEnd; CoagOutlet_Origin[2]]
FirstCoagPipe_Origin := [CoagMaleInsert_Origin[0]; CoagMaleInsert_Origin[1] - L_MaleInsertEnd; CoagMaleInsert_Origin[2]]
FirstCoagElbow_Origin := [FirstCoagPipe_Origin[0]; FirstCoagPipe_Origin[1] - L_FirstPipe; FirstCoagPipe_Origin[2]]
SecondCoagPipe_Origin := [
    FirstCoagElbow_Origin[0];
    FirstCoagElbow_Origin[1] - ElbowRadius(ND_CoagPiping);
    FirstCoagElbow_Origin[2] - ElbowRadius(ND_CoagPiping)
]
CoagBallValve_Origin := [SecondCoagPipe_Origin[0]; SecondCoagPipe_Origin[1]; SecondCoagPipe_Origin[2] - L_SecondPipe]
ThirdCoagPipe_Origin := [CoagBallValve_Origin[0]; CoagBallValve_Origin[1]; CoagBallValve_Origin[2] - L_BallValve]
SecondCoagElbow_Origin := [ThirdCoagPipe_Origin[0]; ThirdCoagPipe_Origin[1]; ThirdCoagPipe_Origin[2] - L_ThirdPipe]
FourthCoagPipe_Origin := [
    SecondCoagElbow_Origin[0] - ElbowRadius(ND_CoagPiping);
    SecondCoagElbow_Origin[1];
    SecondCoagElbow_Origin[2] - ElbowRadius(ND_CoagPiping)
]
CoagTee_Origin := [
    FourthCoagPipe_Origin[0] - L_FourthPipe - 1/2*TeeLength(ND_CoagPiping);
    FourthCoagPipe_Origin[1];
    FourthCoagPipe_Origin[2] - ShortTeeLength(ND_CoagPiping)
]
FinalCoagPipe_Origin := [CoagTee_Origin[0]; CoagTee_Origin[1]; CoagTee_Origin[2]]
# Draw the first coagulant tank
LayerNewCoagTanks := layer_new("EtCdcCoagtanks", grey)
CoagOuterTankWall := CylinderF(CoagTank_Origin - [0 m; 0 m; T_ChemTankWall], R_CoagTank + T_ChemTankWall, H_CoagTank + T_ChemTankWall, [0; 90]*deg)
FreezeCoagTanks := FreezeLayer("EtCdcCoagtanks")
CoagInnerTankWall := CylinderF(CoagTank_Origin, R_CoagTank, H_CoagTank + zc, [0; 90]*deg)
GroupCoagTank := GroupAll("DeleteMe")
SubtractCoagInner := SubtractF(["EtCdcCoagtanks"], "DeleteMe")
DrawCoagTanks := stack(LayerNewCoagTanks, viewtop1, CoagOuterTankWall, FreezeCoagTanks, CoagInnerTankWall, GroupCoagTank, SubtractCoagInner)
# Draw the coagulant tank plumbing
CoagSubtractionCylinder := CylinderF(CoagOutlet_Origin, R_TankOutlet, 5*T_ChemTankWall, [90; 0]*deg)
GroupCoagCylinder := GroupAll("DeleteMe")
SubtractCoagOutlet := SubtractF(["EtCdcCoagtanks"], "DeleteMe")
LayerCoagPieces := layer_new("EtCdcCoagconnectingpiecesPlumbing", green)
CoagBulkheadFitting := insertdwg("BulkheadFitting", CoagBulkheadFitting_Origin, 3/250, 3/250, 0 deg)
CoagMaleInsert := insertdwg("MaleInsert", CoagMaleInsert_Origin, 3/250, 3/250, 0 deg)
FirstCoagTankPipe := PipeF(FirstCoagPipe_Origin, L_FirstPipe, [90; 0]*deg, ND_CoagPiping, PS_Modules)
FirstCoagTankElbow := ElbowF(FirstCoagElbow_Origin, [0; 90; 180]*deg, ND_CoagPiping, PS_Modules)
SecondCoagPipe := PipeF(SecondCoagPipe_Origin, L_SecondPipe, [0; 270]*deg, ND_CoagPiping, PS_Modules)
CoagBallValve := insertdwg("BallValve", CoagBallValve_Origin, 1/250, 1/250, 0 deg)
ThirdCoagPipe := PipeF(ThirdCoagPipe_Origin, L_ThirdPipe, [0; 270]*deg, ND_CoagPiping, PS_Modules)
SecondCoagElbow := ElbowF(SecondCoagElbow_Origin, [0; 0; 270]*deg, ND_CoagPiping, PS_Modules)
FourthCoagPipe := PipeF(FourthCoagPipe_Origin, L_FourthPipe, [0; 0]*deg, ND_CoagPiping, PS_Modules)
CoagPlumbing := stack(CoagSubtractionCylinder, GroupCoagCylinder, SubtractCoagOutlet, LayerCoagPieces, CoagBulkheadFitting, CoagMaleInsert, FirstCoagTankPipe, FirstCoagTankElbow, SecondCoagElbow, SecondCoagPipe, CoagBallValve, ThirdCoagPipe, SecondCoagElbow, FourthCoagPipe)
# Reflect the first coagulant tank and associated plumbing
ThawCoagTanks := layer_thaw("EtCdcCoagtanks")
MirrorCoagTank := mirror_all([CoagTank_Origin[0] - 3/2*R_CoagTank; CoagTank_Origin[1] - (R_CoagTank + T_ChemTankWall) - zc], [CoagTank_Origin[0] - 3/2*R_CoagTank; CoagTank_Origin[1] - (R_CoagTank + T_ChemTankWall) + zc])
LayerFreezeCoagTanks := FreezeLayer("EtCdcCoagtanks")
LayerFreezeCoagPieces := FreezeLayer("EtCdcCoagconnectingpiecesPlumbing")
CoagTankReflect := stack(ThawCoagTanks, MirrorCoagTank, LayerFreezeCoagPieces, LayerFreezeCoagTanks)
# Draw the plumbing that connects the mirrored pieces
LayerNewCoagTee := layer_new("EtCdcCoagteePlumbing", grey)
CoagConnectingTee := TeeF(CoagTee_Origin, [0; 0; 270]*deg, ND_CoagPiping, PS_Modules)
FinalCoagPipe := PipeF(FinalCoagPipe_Origin, L_FinalPipe, [0; 270]*deg, ND_CoagPiping, PS_Modules)
CoagTee := stack(LayerNewCoagTee, CoagConnectingTee, FinalCoagPipe)
LayerFreezeCoagTee := FreezeLayer("EtCdcCoagteePlumbing")
# the freeze is not stacked because we will only freeze it if it we do NOT need to mirror the entrance tank
# If needed, mirror coagulant tanks and plumbing to other side of the entrance tank
UnfreezeCoagMirrorPieces := ThawMultiple(["EtCdcCoagtanks"; "EtCdcCoagconnectingpiecesPlumbing"])
MirrorAllCoagTanks := Mirror3dAll("YZ", [Plant_Origin[0] - 1/2*L_Sed; 0 m; 0 m], "Y")
# mirror when there is an odd number off floc channels,
# mirroring is in the second one
CoagMirrorAll := stack(UnfreezeCoagMirrorPieces, MirrorAllCoagTanks)
# Chlorine Tanks
ChlorineTank_Origin := [
    Plant_Origin[0] + 2.5*T_PlantWall + R_ChlorineTank;
    Plant_Origin[1] + T_ChemTankWall + R_ChlorineTank - 2/3*S_Walkway;
    CoagTank_Origin[2]
]
LayerNewChlorineTanks := layer_new("EtCdcChlortanks", grey)
ChlorOuterTankWall := CylinderF(ChlorineTank_Origin - [0 m; 0 m; T_ChemTankWall], R_ChlorineTank + T_ChemTankWall, H_ChlorineTank + T_ChemTankWall, [0; 90]*deg)
ChlorInnerTankWall := cylinderC([ChlorineTank_Origin[0]; ChlorineTank_Origin[1]; ChlorineTank_Origin[2] + T_ChemTankWall], R_ChlorineTank, H_ChlorineTank)
SubtractChlorInner := subtractD([
    ChlorineTank_Origin[0] - (R_ChlorineTank + T_ChemTankWall);
    ChlorineTank_Origin[1];
    ChlorineTank_Origin[2]
], [ChlorineTank_Origin[0] - R_ChlorineTank; ChlorineTank_Origin[1]; ChlorineTank_Origin[2]])
SecondChlorTank := Mirror3dAll("YZ", [ChlorineTank_Origin[0] + (R_ChlorineTank + T_ChemTankWall); 0 m; 0 m] + 0.5*S_ChemTanks, "N")
LayerFreezeChlorineTanks := FreezeLayer("EtCdcChlortanks")
CoagTanks :=
    stack(DrawCoagTanks, CoagPlumbing, CoagTankReflect, CoagTee, LayerFreezeCoagTanks, LayerFreezeCoagTee, LayerFreezeCoagPieces) if mod(N_FlocChannels, 2) == 0
    stack(DrawCoagTanks, CoagPlumbing, CoagTankReflect, CoagTee, CoagMirrorAll, LayerFreezeCoagTanks, LayerFreezeCoagTee, LayerFreezeCoagPieces) otherwise
ChlorTanks := stack(LayerNewChlorineTanks, ChlorOuterTankWall, ChlorInnerTankWall, SubtractChlorInner, SecondChlorTank, LayerFreezeChlorineTanks)
AC_ChemTanks := stack(CoagTanks, ChlorTanks)
