# [reference: MasterProgram.xmcd]
# [reference: ChemStorageCylinders.xmcd]
ChlorineTank_origin := [
    Et_Origin[0] - L_Et - T_PlantWall - 3*R_ChlorineTank - 3*T_ChemTankWall - S_TankBorder - S_BetweenTanks;
    Plant_Origin[1] + 0.5*(R_ChlorineTank + T_ChemTankWall);
    AlumTank1_origin[2]
]
ChlorineTankscript :=
    layernew ← layer_new("chlorinetanks", grey)
    viewtop ← viewtop1
    outertankwall ← cylinderC(ChlorineTank_origin, R_ChlorineTank + T_ChemTankWall, H_ChlorineTank + T_ChemTankWall)
    innertankwall ← cylinderC([ChlorineTank_origin[0]; ChlorineTank_origin[1]; ChlorineTank_origin[2] + T_ChemTankWall], R_ChlorineTank, H_ChlorineTank)
    viewtop ← viewtop1
    subtract ← subtractD([
        ChlorineTank_origin[0] - (R_ChlorineTank + T_ChemTankWall);
        ChlorineTank_origin[1];
        ChlorineTank_origin[2]
    ], [ChlorineTank_origin[0] - R_ChlorineTank; ChlorineTank_origin[1]; ChlorineTank_origin[2]])
    SecondTank ← Mirror3dAll("YZ", [ChlorineTank_origin[0] + (R_ChlorineTank + T_ChemTankWall); 0 m; 0 m] + 0.5*S_BetweenTanks, "N")
    union ← union_allA
    layerset0 ← layer_set("0")
    Mirror ← Mirror3dAll("YZ", [Plant_Origin[0] - 1/2*L_Sed; 0 m; 0 m], "Y")
    layerfreeze ← layer_freeze("chlorinetanks")
    Final ←
        stack(layernew, viewtop, outertankwall, innertankwall, viewtop, subtract, SecondTank, union, layerset0, Mirror, layerfreeze) if mod(N_FlocChannels, 2) == 0
        stack(layernew, viewtop, outertankwall, innertankwall, viewtop, subtract, SecondTank, union, layerset0, Mirror, layerfreeze) otherwise
    return Final
AC_ChemTanks := stack(ChlorineTankscript)
# [component: inputs AC_ChemTanks]
