# Explanation: The previous design of the drainchannel were leaving a gap in the further edge. To have a better design, leaving a T.PlantWall thick closing in one end of the DC, we built a function which firstly draws a solid having the dimentions of the outer surface of the drainchannel and subtracts a smaller solid which is in the dimentions of the channel gap where the water will be flowing.
#
# The functions EtDrainChannel and VertDrainChannel are doing this subtration. DrainChannelF and DrainChannelSubF functions used to draw the entrance tank drain channel having the rectengular pi as an input while DrainChannelF2 and DrainChannelSubF2 are used to draw the vertical drain channel which uses the width of the walkway as a width input. Therefore, if you take a look at these functions you will see two different functions which are used in the height calculation H_HorizChannelΠ and H_HorizChannel. When calculating the head losses these functions take the entrance and exit effects in to consideration unlike the formerly used function.
DrainChannelF(Origin, AngleVector, Q, Π_Channel, ΔH, L_Channel, ν, ε, manifold) :=
    Height ← H_HorizChannelΠ(Q, Π_Channel, ΔH, L_Channel, ν, ε, manifold)
    W_Channel ← Height/Π_Channel
    LargeCrossSection ← Pline3D([
        Origin;
        Origin - [0 m; 0 m; Height + T_PlantWall];
        Origin - [0 m; -W_Channel - 2*T_PlantWall; Height + T_PlantWall];
        Origin - [0 m; -W_Channel - 2*T_PlantWall; 0 m];
        Origin
    ])
    SmallCrossSection ← Pline3D([
        Origin - [L_Channel; 0 m; 0 m];
        Origin - [L_Channel; 0 m; Height/2 + T_PlantWall];
        Origin - [L_Channel; -W_Channel - 2*T_PlantWall; Height/2 + T_PlantWall];
        Origin - [L_Channel; -W_Channel - 2*T_PlantWall; 0 m];
        Origin - [L_Channel; 0 m; 0 m]
    ])
    Zoom ← zoom_win(Origin + [zc; 0 m; 0 m], Origin - [L_Channel + zc; 0 m; 0 m])
    Loft ← Loft(Origin, Origin - [L_Channel; 0 m; 0 m])
    Rotate ← [
        Rotate3DLast(Origin, "z", AngleVector[0]);
        Rotate3DLast(Origin, "y", AngleVector[1]);
        Rotate3DLast(Origin, "x", AngleVector[2])
    ]
    Final ← stack(LargeCrossSection, SmallCrossSection, Zoom, Loft)
    for i ∈ 0 .. 2
        Final ← stack(Final, Rotate[i]) if AngleVector[i] ≠ 0
    return Final
# Comments:
#
# Here we have used the H_HorizChannelΠ function to determine the height of the Entrance Tank Drain channel. This function needs Π_Channel as an input which is the Height over Width ratio. Considering the fact that the optimum Π for a rectangular open channel is 1/2, Π_Rectangular is defined in the master program accordingly.
#
# On the other hand, the width of the Vertical Drain channel is fixed as W_DCWalkway - 2*T.PlantWall. W_DCWalkway is the width of the walkway passing above the VertDC. This is defined in the master program as W_DCWalkway := 1 m. As the width of the VertDC is previously determined the H_HorizChannel function is used instead of H_HorizChannelΠ
DrainChannelFSub(Origin, AngleVector, Q, Π_Channel, ΔH, L_Channel, ν, ε, manifold) :=
    Height ← H_HorizChannelΠ(Q, Π_Channel, ΔH, L_Channel, ν, ε, manifold)
    W_Channel ← Height/Π_Channel
    LargeCrossSection ← Pline3D([
        Origin - [0 m; -T_PlantWall; 0 m];
        Origin - [0 m; -T_PlantWall; Height];
        Origin - [0 m; -W_Channel - T_PlantWall; Height];
        Origin - [0 m; -W_Channel - T_PlantWall; 0 m];
        Origin - [0 m; -T_PlantWall; 0 m]
    ])
    SmallCrossSection ← Pline3D([
        Origin - [L_Channel; -T_PlantWall; 0 m];
        Origin - [L_Channel; -T_PlantWall; Height/2];
        Origin - [L_Channel; -W_Channel - T_PlantWall; Height/2];
        Origin - [L_Channel; -W_Channel - T_PlantWall; 0 m];
        Origin - [L_Channel; -T_PlantWall; 0 m]
    ])
    Zoom ← zoom_win(Origin + [zc; T_PlantWall; 0 m], Origin - [L_Channel + zc; -T_PlantWall; 0 m])
    Loft ← Loft(Origin - [0 m; -T_PlantWall; 0 m], Origin - [L_Channel; -T_PlantWall; 0 m])
    Rotate ← [
        Rotate3DLast(Origin, "z", AngleVector[0]);
        Rotate3DLast(Origin, "y", AngleVector[1]);
        Rotate3DLast(Origin, "x", AngleVector[2])
    ]
    Final ← stack(LargeCrossSection, SmallCrossSection, Zoom, Loft)
    for i ∈ 0 .. 2
        Final ← stack(Final, Rotate[i]) if AngleVector[i] ≠ 0
    return Final
DrainChannelF2(Origin, AngleVector, Q, W_Channel, ΔH, L_Channel, ν, ε, manifold) :=
    Height ← H_HorizChannel(Q, W_Channel, ΔH, L_Channel, ν, ε, manifold)
    LargeCrossSection ← Pline3D([
        Origin;
        Origin - [0 m; 0 m; Height + T_PlantWall];
        Origin - [0 m; -W_Channel - 2*T_PlantWall; Height + T_PlantWall];
        Origin - [0 m; -W_Channel - 2*T_PlantWall; 0 m];
        Origin
    ])
    SmallCrossSection ← Pline3D([
        Origin - [L_Channel; 0 m; 0 m];
        Origin - [L_Channel; 0 m; Height/2 + T_PlantWall];
        Origin - [L_Channel; -W_Channel - 2*T_PlantWall; Height/2 + T_PlantWall];
        Origin - [L_Channel; -W_Channel - 2*T_PlantWall; 0 m];
        Origin - [L_Channel; 0 m; 0 m]
    ])
    Zoom ← zoom_win(Origin + [zc; 0 m; 0 m], Origin - [L_Channel + zc; 0 m; 0 m])
    Loft ← Loft(Origin, Origin - [L_Channel; 0 m; 0 m])
    Rotate ← [
        Rotate3DLast(Origin, "z", AngleVector[0]);
        Rotate3DLast(Origin, "y", AngleVector[1]);
        Rotate3DLast(Origin, "x", AngleVector[2])
    ]
    Final ← stack(LargeCrossSection, SmallCrossSection, Zoom, Loft)
    for i ∈ 0 .. 2
        Final ← stack(Final, Rotate[i]) if AngleVector[i] ≠ 0
    return Final
DrainChannelFSub2(Origin, AngleVector, Q, W_Channel, ΔH, L_Channel, ν, ε, manifold) :=
    Height ← H_HorizChannel(Q, W_Channel, ΔH, L_Channel, ν, ε, manifold)
    LargeCrossSection ← Pline3D([
        Origin - [0 m; -T_PlantWall; 0 m];
        Origin - [0 m; -T_PlantWall; Height];
        Origin - [0 m; -W_Channel - T_PlantWall; Height];
        Origin - [0 m; -W_Channel - T_PlantWall; 0 m];
        Origin - [0 m; -T_PlantWall; 0 m]
    ])
    SmallCrossSection ← Pline3D([
        Origin - [L_Channel; -T_PlantWall; 0 m];
        Origin - [L_Channel; -T_PlantWall; Height/2];
        Origin - [L_Channel; -W_Channel - T_PlantWall; Height/2];
        Origin - [L_Channel; -W_Channel - T_PlantWall; 0 m];
        Origin - [L_Channel; -T_PlantWall; 0 m]
    ])
    Zoom ← zoom_win(Origin + [zc; T_PlantWall; 0 m], Origin - [L_Channel + zc; -T_PlantWall; 0 m])
    Loft ← Loft(Origin - [0 m; -T_PlantWall; 0 m], Origin - [L_Channel; -T_PlantWall; 0 m])
    Rotate ← [
        Rotate3DLast(Origin, "z", AngleVector[0]);
        Rotate3DLast(Origin, "y", AngleVector[1]);
        Rotate3DLast(Origin, "x", AngleVector[2])
    ]
    Final ← stack(LargeCrossSection, SmallCrossSection, Zoom, Loft)
    for i ∈ 0 .. 2
        Final ← stack(Final, Rotate[i]) if AngleVector[i] ≠ 0
    return Final
EtDrainChannel(Origin, AngleVector, Q, Π_Channel, ΔH, L_Channel, ν, ε, manifold) :=
    DCLayer ← layer_new("DrainChannel", ltgrey)
    A ← DrainChannelF(Origin, AngleVector, Q, Π_Channel, ΔH, L_Channel, ν, ε, manifold)
    Freeze ← FreezeLayer("DrainChannel")
    B ← DrainChannelFSub(Origin, AngleVector, Q, Π_Channel, ΔH, L_Channel - T_PlantWall, ν, ε, manifold)
    GroupDC ← GroupAll("DeleteMe")
    SubtractDC ← SubtractF(["DrainChannel"], "DeleteMe")
    return stack(DCLayer, A, Freeze, B, GroupDC, SubtractDC)
VertDrainChannel(Origin, AngleVector, Q, W_Channel, ΔH, L_Channel, ν, ε, manifold) :=
    DCLayer ← layer_new("DrainChannel2", ltgrey)
    A ← DrainChannelF2(Origin, AngleVector, Q, W_Channel, ΔH, L_Channel, ν, ε, manifold)
    Freeze ← FreezeLayer("DrainChannel2")
    B ← DrainChannelFSub2(Origin, AngleVector, Q, W_Channel, ΔH, L_Channel - T_PlantWall, ν, ε, manifold)
    GroupDC ← GroupAll("DeleteMe")
    SubtractDC ← SubtractF(["DrainChannel2"], "DeleteMe")
    return stack(DCLayer, A, Freeze, B, GroupDC, SubtractDC)
