DCLayer := layer_new("DC", ltgrey)
EtDC := DrainChannelF([Et_Origin[0] + T_PlantWall + S_Fitting; Et_Origin[1] - T_PlantWall; Et_Origin[2] - T_PlantWall], [0; 0; 0]*deg, Q_EtDC, Π_Rectangular, 1/2*m, L_EtDC, Nu_Water, E_Concrete, 1)
PlantDC := DrainChannelF2([Plant_Origin[0]; Plant_Origin[0] - T_PlantWall; Plant_Origin[2] - T_PlantWall], [270; 0; 0]*deg, Q_VertDC, W_DC, 1/2*m, L_DC, Nu_Water, E_Concrete, 1)
DCFrz := FreezeLayer("DC")
DCConcrete := stack(DCLayer, EtDC, PlantDC, DCFrz)
DCFiPipeLayer := layer_new("DCFiDrainFittings", blue)
L_FiOutPipeHoriz2a := W_FiInletChannel - ElbowRadius(ND_FiExitWaste) + L_FiEntrance + S_Fitting + ConRadius(ND_FiExitWaste) + 3*T_PlantWall - CouplingLength(ND_FiExitWaste) + SocketDepth(ND_FiExitWaste)
FiOutPipeHoriz2a := PipeSUBF([
    Plant_Origin[0] + T_PlantWall + W_DC + CouplingLength(ND_FiExitWaste) - SocketDepth(ND_FiExitWaste) + L_FiOutPipeHoriz2a;
    FiExitCoupling3_origin[1] - (Fi_origin[1] - (Et_Origin[1] - W_Fi - T_PlantWall - W_EtWalkway - T_FiWall));
    Z_FiOutPipe2aEnd - ElbowRadius(ND_FiExitWaste)
], L_FiOutPipeHoriz2a, [0; 0]*deg, ND_FiExitWaste, PS_Default, ["DC"])
FiOutCouplingHoriz2a := CouplingSUBF([
    Plant_Origin[0] + T_PlantWall + W_DC + CouplingLength(ND_FiExitWaste) - SocketDepth(ND_FiExitWaste);
    FiExitCoupling3_origin[1] - (Fi_origin[1] - (Et_Origin[1] - W_Fi - T_PlantWall - W_EtWalkway - T_FiWall));
    Z_FiOutPipe2aEnd - ElbowRadius(ND_FiExitWaste)
], [0; 0]*deg, ND_FiExitWaste, PS_Default, ["DC"])
FiOutPipeHoriz2aMirror := PipeSUBF([
    Plant_Origin[0] + T_PlantWall + W_DC + CouplingLength(ND_FiExitWaste) - SocketDepth(ND_FiExitWaste) + L_FiOutPipeHoriz2a;
    FiExitCoupling3_origin[1] - (Fi_origin[1] - (Et_Origin[1] - W_Fi - T_PlantWall - W_EtWalkway - T_FiWall)) - W_FiOverflow - 2*T_PlantWall - 2*(S_Fitting + ConRadius(ND_FiExitWaste));
    Z_FiOutPipe2aEnd - ElbowRadius(ND_FiExitWaste)
], L_FiOutPipeHoriz2a, [0; 0]*deg, ND_FiExitWaste, PS_Default, ["DC"])
FiOutCouplingHoriz2aMirror := CouplingSUBF([
    Plant_Origin[0] + T_PlantWall + W_DC + CouplingLength(ND_FiExitWaste) - SocketDepth(ND_FiExitWaste);
    FiExitCoupling3_origin[1] - (Fi_origin[1] - (Et_Origin[1] - W_Fi - T_PlantWall - W_EtWalkway - T_FiWall)) - W_FiOverflow - 2*T_PlantWall - 2*(S_Fitting + ConRadius(ND_FiExitWaste));
    Z_FiOutPipe2aEnd - ElbowRadius(ND_FiExitWaste)
], [0; 0]*deg, ND_FiExitWaste, PS_Default, ["DC"])
FiOutPipeHoriz2aArray1 := PipeSUBF([
    Plant_Origin[0] + T_PlantWall + W_DC + CouplingLength(ND_FiExitWaste) - SocketDepth(ND_FiExitWaste) + L_FiOutPipeHoriz2a;
    FiExitCoupling3_origin[1] - (Fi_origin[1] - (Et_Origin[1] - W_Fi - T_PlantWall - W_EtWalkway - T_FiWall)) - max((W_Fi + T_FiWall)*2, 2*W_FiEntrance + W_FiOverflow + 3*T_PlantWall);
    Z_FiOutPipe2aEnd - ElbowRadius(ND_FiExitWaste)
], L_FiOutPipeHoriz2a, [0; 0]*deg, ND_FiExitWaste, PS_Default, ["DC"])
FiOutCouplingHoriz2aArray1 := CouplingSUBF([
    Plant_Origin[0] + T_PlantWall + W_DC + CouplingLength(ND_FiExitWaste) - SocketDepth(ND_FiExitWaste);
    FiExitCoupling3_origin[1] - (Fi_origin[1] - (Et_Origin[1] - W_Fi - T_PlantWall - W_EtWalkway - T_FiWall)) - max((W_Fi + T_FiWall)*2, 2*W_FiEntrance + W_FiOverflow + 3*T_PlantWall);
    Z_FiOutPipe2aEnd - ElbowRadius(ND_FiExitWaste)
], [0; 0]*deg, ND_FiExitWaste, PS_Default, ["DC"])
FiOutPipeHoriz2aArray2 := PipeSUBF([
    Plant_Origin[0] + T_PlantWall + W_DC + CouplingLength(ND_FiExitWaste) - SocketDepth(ND_FiExitWaste) + L_FiOutPipeHoriz2a;
    FiExitCoupling3_origin[1] - (Fi_origin[1] - (Et_Origin[1] - W_Fi - T_PlantWall - W_EtWalkway - T_FiWall)) - W_FiOverflow - 2*T_PlantWall - 2*(S_Fitting + ConRadius(ND_FiExitWaste)) - max((W_Fi + T_FiWall)*2, 2*W_FiEntrance + W_FiOverflow + 3*T_PlantWall);
    Z_FiOutPipe2aEnd - ElbowRadius(ND_FiExitWaste)
], L_FiOutPipeHoriz2a, [0; 0]*deg, ND_FiExitWaste, PS_Default, ["DC"])
FiOutCouplingHoriz2aArray2 := CouplingSUBF([
    Plant_Origin[0] + T_PlantWall + W_DC + CouplingLength(ND_FiExitWaste) - SocketDepth(ND_FiExitWaste);
    FiExitCoupling3_origin[1] - (Fi_origin[1] - (Et_Origin[1] - W_Fi - T_PlantWall - W_EtWalkway - T_FiWall)) - W_FiOverflow - 2*T_PlantWall - 2*(S_Fitting + ConRadius(ND_FiExitWaste)) - max((W_Fi + T_FiWall)*2, 2*W_FiEntrance + W_FiOverflow + 3*T_PlantWall);
    Z_FiOutPipe2aEnd - ElbowRadius(ND_FiExitWaste)
], [0; 0]*deg, ND_FiExitWaste, PS_Default, ["DC"])
L_FiOverflowDrainHorizPipe := 2*T_PlantWall + W_FiInletChannel + L_FiOverflow/2 - ElbowRadius(ND_FiEntranceOverflow) - CouplingLength(ND_FiEntranceOverflow) + SocketDepth(ND_FiEntranceOverflow)
FiOverflowDrainHorizPipe := PipeSUBF([
    Plant_Origin[0] + T_PlantWall + W_DC + CouplingLength(ND_FiExitWaste) - SocketDepth(ND_FiExitWaste) + L_FiOverflowDrainHorizPipe;
    FiEntranceBox_origin[1] - T_PlantWall - W_FiOverflow/2 - (Fi_origin[1] - (Et_Origin[1] - W_Fi - T_PlantWall - W_EtWalkway - T_FiWall));
    Z_FiOverflowDrainPipeEnd - ElbowRadius(ND_FiEntranceOverflow)
], L_FiOverflowDrainHorizPipe, [0; 0], ND_FiEntranceOverflow, PS_Default, ["DC"])
FiOverflowDrainHorizCoupling := CouplingSUBF([
    Plant_Origin[0] + T_PlantWall + W_DC + CouplingLength(ND_FiExitWaste) - SocketDepth(ND_FiExitWaste);
    FiEntranceBox_origin[1] - T_PlantWall - W_FiOverflow/2 - (Fi_origin[1] - (Et_Origin[1] - W_Fi - T_PlantWall - W_EtWalkway - T_FiWall));
    Z_FiOverflowDrainPipeEnd - ElbowRadius(ND_FiEntranceOverflow)
], [0; 0], ND_FiEntranceOverflow, PS_Default, ["DC"])
FiOverflowDrainHorizPipeArray := PipeSUBF([
    Plant_Origin[0] + T_PlantWall + W_DC + CouplingLength(ND_FiExitWaste) - SocketDepth(ND_FiExitWaste) + L_FiOverflowDrainHorizPipe;
    FiEntranceBox_origin[1] - T_PlantWall - W_FiOverflow/2 - (Fi_origin[1] - (Et_Origin[1] - W_Fi - T_PlantWall - W_EtWalkway - T_FiWall)) - max((W_Fi + T_FiWall)*2, 2*W_FiEntrance + W_FiOverflow + 3*T_PlantWall);
    Z_FiOverflowDrainPipeEnd - ElbowRadius(ND_FiEntranceOverflow)
], L_FiOverflowDrainHorizPipe, [0; 0], ND_FiEntranceOverflow, PS_Default, ["DC"])
FiOverflowDrainHorizCouplingArray := CouplingSUBF([
    Plant_Origin[0] + T_PlantWall + W_DC + CouplingLength(ND_FiExitWaste) - SocketDepth(ND_FiExitWaste);
    FiEntranceBox_origin[1] - T_PlantWall - W_FiOverflow/2 - (Fi_origin[1] - (Et_Origin[1] - W_Fi - T_PlantWall - W_EtWalkway - T_FiWall)) - max((W_Fi + T_FiWall)*2, 2*W_FiEntrance + W_FiOverflow + 3*T_PlantWall);
    Z_FiOverflowDrainPipeEnd - ElbowRadius(ND_FiEntranceOverflow)
], [0; 0], ND_FiEntranceOverflow, PS_Default, ["DC"])
FiOverflowComponents :=
    stack(FiOverflowDrainHorizPipe, FiOverflowDrainHorizCoupling) if N_Fi < 3
    stack(FiOverflowDrainHorizPipe, FiOverflowDrainHorizCoupling, FiOverflowDrainHorizPipeArray, FiOverflowDrainHorizCouplingArray) otherwise
DCFiPipeFrz := FreezeLayer("DCFiDrainFittings")
DCFiPiping :=
    stack(DCFiPipeLayer, FiOutPipeHoriz2a, FiOutCouplingHoriz2a, FiOverflowComponents, DCFiPipeFrz) if N_Fi == 1
    stack(DCFiPipeLayer, FiOutPipeHoriz2a, FiOutCouplingHoriz2a, FiOutPipeHoriz2aMirror, FiOutCouplingHoriz2aMirror, FiOverflowComponents, DCFiPipeFrz) if N_Fi == 2
    stack(DCFiPipeLayer, FiOutPipeHoriz2a, FiOutCouplingHoriz2a, FiOutPipeHoriz2aMirror, FiOutCouplingHoriz2aMirror, FiOutPipeHoriz2aArray1, FiOutCouplingHoriz2aArray1, FiOutPipeHoriz2aArray2, FiOutCouplingHoriz2aArray2, FiOverflowComponents, DCFiPipeFrz) otherwise
AC_DrainChannel := stack(DCConcrete, DCFiPiping)
