# Explanation: The previous design of the drainchannel were leaving a gap in the further edge. To have a better design, leaving a T.PlantWall thick closing in one end of the DC, we built a function which firstly draws a solid having the dimentions of the outer surface of the drainchannel and subtracts a smaller solid which is in the dimentions of the channel gap where the water will be flowing.
#
# The functions EtDrainChannel and VertDrainChannel are doing this subtration. DrainChannelF and DrainChannelSubF functions used to draw the entrance tank drain channel having the rectengular pi as an input while DrainChannelF2 and DrainChannelSubF2 are used to draw the vertical drain channel which uses the width of the walkway as a width input. Therefore, if you take a look at these functions you will see two different functions which are used in the height calculation H_HorizChannelΠ and H_HorizChannel. When calculating the head losses these functions take the entrance and exit effects in to consideration unlike the formerly used function.
# Comments:
#
# Here we have used the H_HorizChannelΠ function to determine the height of the Entrance Tank Drain channel. This function needs Π_Channel as an input which is the Height over Width ratio. Considering the fact that the optimum Π for a rectangular open channel is 1/2, Π_Rectangular is defined in the master program accordingly.
#
# On the other hand, the width of the Vertical Drain channel is fixed as W_DCWalkway - 2*T.PlantWall. W_DCWalkway is the width of the walkway passing above the VertDC. This is defined in the master program as W_DCWalkway := 1 m. As the width of the VertDC is previously determined the H_HorizChannel function is used instead of H_HorizChannelΠ
DrainChannelF(Origin, AngleVector, Q, Π_Channel, ΔH, L_Channel, ν, ε, manifold) :=
    Height ← H_HorizChannelΠ(Q, Π_Channel, ΔH, L_Channel, ν, ε, manifold)
    W_Channel ← Height/Π_Channel
    LargeCrossSection ← Pline3D([
        Origin;
        Origin - [0 m; 0 m; Height + T_PlantWall];
        Origin - [0 m; -W_Channel - 2*T_PlantWall; Height + T_PlantWall];
        Origin - [0 m; -W_Channel - 2*T_PlantWall; 0 m];
        Origin
    ])
    SmallCrossSection ← Pline3D([
        Origin - [L_Channel; 0 m; 0 m];
        Origin - [L_Channel; 0 m; Height/2 + T_PlantWall];
        Origin - [L_Channel; -W_Channel - 2*T_PlantWall; Height/2 + T_PlantWall];
        Origin - [L_Channel; -W_Channel - 2*T_PlantWall; 0 m];
        Origin - [L_Channel; 0 m; 0 m]
    ])
    Zoom ← zoom_win(Origin + [zc; 0 m; 0 m], Origin - [L_Channel + zc; 0 m; 0 m])
    LoftLarge ← Loft(Origin, Origin - [L_Channel; 0 m; 0 m])
    Rotate ← [
        Rotate3DLast(Origin, "z", AngleVector[0]);
        Rotate3DLast(Origin, "y", AngleVector[1]);
        Rotate3DLast(Origin, "x", AngleVector[2])
    ]
    Temp ← stack(LargeCrossSection, SmallCrossSection, Zoom, LoftLarge)
    for i ∈ 0 .. 2
        Temp ← stack(Temp, Rotate[i]) if AngleVector[i] ≠ 0
    LargeSubCrossSection ← Pline3D([
        Origin - [0 m; -T_PlantWall; 0 m];
        Origin - [0 m; -T_PlantWall; Height];
        Origin - [0 m; -W_Channel - T_PlantWall; Height];
        Origin - [0 m; -W_Channel - T_PlantWall; 0 m];
        Origin - [0 m; -T_PlantWall; 0 m]
    ])
    SmallSubCrossSection ← Pline3D([
        Origin - [L_Channel - T_PlantWall; -T_PlantWall; 0 m];
        Origin - [L_Channel - T_PlantWall; -T_PlantWall; Height/2 + T_PlantWall*0.5*Height/L_Channel];
        Origin - [L_Channel - T_PlantWall; -W_Channel - T_PlantWall; Height/2 + T_PlantWall*0.5*Height/L_Channel];
        Origin - [L_Channel - T_PlantWall; -W_Channel - T_PlantWall; 0 m];
        Origin - [L_Channel - T_PlantWall; -T_PlantWall; 0 m]
    ])
    ZoomSub ← zoom_win(Origin + [zc; T_PlantWall; 0 m], Origin - [L_Channel + zc; -T_PlantWall; 0 m])
    LoftSub ← Loft(Origin - [0 m; -T_PlantWall; 0 m], Origin - [L_Channel - T_PlantWall; -T_PlantWall; 0 m])
    Last ← stack(Temp, LargeSubCrossSection, SmallSubCrossSection, ZoomSub, LoftSub)
    for i ∈ 0 .. 2
        Last ← stack(Last, Rotate[i]) if AngleVector[i] ≠ 0
    HollowChannel ← SubtractGeneral([Origin], [Origin - [L_Channel - T_PlantWall; -T_PlantWall; 0 m]])
    return stack(Last, ZoomSub, HollowChannel)  # error: This variable is undefined.
DrainChannelF2(Origin, AngleVector, Q, W_Channel, ΔH, L_Channel, ν, ε, manifold) :=
    Height ← H_HorizChannel(Q, W_Channel, ΔH, L_Channel, ν, ε, manifold)
    LargeCrossSection ← Pline3D([
        Origin;
        Origin - [0 m; 0 m; Height + T_PlantWall];
        Origin - [0 m; -W_Channel - 2*T_PlantWall; Height + T_PlantWall];
        Origin - [0 m; -W_Channel - 2*T_PlantWall; 0 m];
        Origin
    ])
    SmallCrossSection ← Pline3D([
        Origin - [L_Channel; 0 m; 0 m];
        Origin - [L_Channel; 0 m; Height/2 + T_PlantWall];
        Origin - [L_Channel; -W_Channel - 2*T_PlantWall; Height/2 + T_PlantWall];
        Origin - [L_Channel; -W_Channel - 2*T_PlantWall; 0 m];
        Origin - [L_Channel; 0 m; 0 m]
    ])
    Zoom ← zoom_win(Origin + [zc; 0 m; 0 m], Origin - [L_Channel + zc; 0 m; 0 m])
    LoftLarge ← Loft(Origin, Origin - [L_Channel; 0 m; 0 m])
    Rotate ← [
        Rotate3DLast(Origin, "z", AngleVector[0]);
        Rotate3DLast(Origin, "y", AngleVector[1]);
        Rotate3DLast(Origin, "x", AngleVector[2])
    ]
    Temp ← stack(LargeCrossSection, SmallCrossSection, Zoom, LoftLarge)
    for i ∈ 0 .. 2
        Temp ← stack(Temp, Rotate[i]) if AngleVector[i] ≠ 0
    LargeSubCrossSection ← Pline3D([
        Origin - [0 m; -T_PlantWall; 0 m];
        Origin - [0 m; -T_PlantWall; Height];
        Origin - [0 m; -W_Channel - T_PlantWall; Height];
        Origin - [0 m; -W_Channel - T_PlantWall; 0 m];
        Origin - [0 m; -T_PlantWall; 0 m]
    ])
    SmallSubCrossSection ← Pline3D([
        Origin - [L_Channel - T_PlantWall; -T_PlantWall; 0 m];
        Origin - [L_Channel - T_PlantWall; -T_PlantWall; Height/2 + T_PlantWall*0.5*Height/L_Channel];
        Origin - [L_Channel - T_PlantWall; -W_Channel - T_PlantWall; Height/2 + T_PlantWall*0.5*Height/L_Channel];
        Origin - [L_Channel - T_PlantWall; -W_Channel - T_PlantWall; 0 m];
        Origin - [L_Channel - T_PlantWall; -T_PlantWall; 0 m]
    ])
    ZoomSub ← zoom_win(Origin + [zc; T_PlantWall; 0 m], Origin - [L_Channel + zc; -T_PlantWall; 0 m])
    LoftSub ← Loft(Origin - [0 m; -T_PlantWall; 0 m], Origin - [L_Channel - T_PlantWall; -T_PlantWall; 0 m])
    Last ← stack(Temp, LargeSubCrossSection, SmallSubCrossSection, ZoomSub, LoftSub)
    for i ∈ 0 .. 2
        Last ← stack(Last, Rotate[i]) if AngleVector[i] ≠ 0
    HollowChannel ← SubtractGeneral([Origin], [Origin - [L_Channel - T_PlantWall; -T_PlantWall; 0 m]])
    return stack(Last, ZoomSub, HollowChannel)  # error: This variable is undefined.
