# [reference: inputs.xmcd]
floc_dim := [20; 8; 10]
lamina_origin := [
    (tank_origin[0] - tank_dim[0] + channel_dim[1] + channel_thick);
    tank_origin[1];
    (tank_origin[2] + offfloorlamina_dist)
]  # error: This variable is undefined.
clear := "_erase all "
new := "new ."  # to create a new window
viewtop := "_-view _top"
viewwire := "_shademode _3"
viewisoshade := "_-view swiso _shade"  # to view a shaded isometric drawing
initialize := viewtop
display := [viewisoshade]
draw_baffle(origin, amp, w, l, t, periods, angle, num_baffles, num_bafflecols, xspace, yspace) :=
    baffle[0] ← concat(initialize, sp, "spline")
    for i ∈ 0 .. periods*4
        baffle_last ← origin + [sin(π/2*i)*amp; i*w/(periods*4); 0]
        baffle[i + 1] ← point(baffle_last)
    baffle[i + 2] ← concat(sp, point(origin - [0; 1; 0]))
    baffle[i + 3] ← point(baffle_last + [0; 1; 0])
    baffle[i + 4] ← "offset"
    baffle[i + 5] ← stringit(t)
    baffle[i + 6] ← point(origin)
    baffle[i + 7] ← point(origin + [t; 0; 0])
    line[0] ← concat(point(origin), sp, point(origin + [t; 0; 0]))
    line[1] ← concat(point(baffle_last), sp, point(baffle_last + [t; 0; 0]))
    baffle[i + 8] ← concat(sp, "line", sp, line[0], sp)
    baffle[i + 9] ← concat("line", sp, line[1], sp)
    baffle[i + 10] ← concat("z e region w", sp, point(origin - [amp; 0; 0]), sp, point(baffle_last + [t + amp; 0; 0]), sp)
    baffle[i + 11] ← concat("extrude", sp, point(origin), sp, sp, stringit(l), sp)
    baffle[i + 12] ← concat("rotate3d", sp, point(origin), sp, sp, "y", sp, point(origin), sp, num2str(90 - angle/deg)) if angle ≠ 90 deg
    baffle[i + 13] ← concat("-array", sp, point(origin), sp, sp, "R", sp, num2str(num_baffles), sp, num2str(num_bafflecols), sp)
    for i ∈ 0 .. TotalBaffles - 1
        baffle[i + 14] ← concat(stringit(xspace), sp) if num_baffles > 1
        baffle[i + 14] ← "" otherwise
        baffle[i + 15] ← concat(stringit(yspace), sp) if num_bafflecols > 1
        baffle[i + 15] ← "" otherwise
    baffle[i + 16] ← " z e"
    baffle  # error: This variable is undefined.
# [component: inputs draw_baffle(tank_origin, 0.5/12, 32/12, 70/12, 4*3/1000, 8.5, 0 deg, TotalBaffles, 1, x_spacing, y_spacing)]
