# Automated Entrance Tank Code
# [reference: MasterProgram.xmcd]
# [reference: new entrance tank.xmcd]
S_Walkway := 1.3183 m  # what about something simple like 1.5m?
Et_Origin := [
    Plant_Origin[0] + T_PlantWall;
    Plant_Origin[1] + N_SedTanks*(W_Sed + T_PlantWall) + (N_FlocChannels*(W_FlocChannel + T_PlantWall)) + S_Walkway + CouplingLength(ND_RMPipe) + ElbowRadius(ND_RMPipe) + ShortTeeLength(ND_RMPipe);
    Z_Et
] = [0.15; 9.52853; 1.04342] m
L_RMPipeHorizLower := Et_Origin[1] - floc_origin[1] - N_FlocChannels*(T_PlantWall + W_FlocChannel) - ElbowRadius(ND_RMPipe) - ShortTeeLength(ND_RMPipe) + 2*SocketDepth(ND_RMPipe) - ConRadius(ND_RMPipe) - S_Elbow - T_PlantWall
L_RMPipeVertLower := Z_EtExit - ShortTeeLength(ND_RMPipe) - RMFlocCoupling_Origin[2] - ElbowRadius(ND_RMPipe)
L_RMPipeVertPipeUpper := ZW_RMPipe - Z_EtExit  # should overestimate the needed length of this pipe
L_CdcLever := 0.45 m  # assumed from Drew's drawing for now
L_EtExitInner := L_CdcLever + S_Elbow + outerradius(ND_RMPipe) - CouplingLength(ND_RMPipe) - ElbowRadius(ND_RMPipe) + 2*SocketDepth(ND_RMPipe)
# might need to add a constraint to lever arm length to ensure
# that the float isn't obstructed by the hopper in the min flow
# situation
L_EtWeir := ZW_Et - (Et_Origin[2] + ConRadius(ND_EtOverflow)*tan(AN_EtSlope)) + SocketDepth(ND_EtOverflow)
L_EtDrainPipe :=
    (ConRadius(ND_RMPipe)*tan(AN_EtSlope) - CouplingLength(ND_RMPipe) + SocketDepth(ND_RMPipe) - T_PlantWall) if ConRadius(ND_RMPipe)*tan(AN_EtSlope) < CouplingLength(ND_RMPipe) + T_PlantWall
    2*SocketDepth(ND_RMPipe)
# Origin Points
Elbow1_Origin := [0 m; L_RMPipeHorizLower + CouplingLength(ND_RMPipe) - 2*SocketDepth(ND_RMPipe); 0 m] + RMFlocCoupling_Origin
PipeHorizLower_Origin := [0 m; CouplingLength(ND_RMPipe) - 2*SocketDepth(ND_RMPipe); 0 m] + RMFlocCoupling_Origin
PipeVertLower_Origin := [0 m; ElbowRadius(ND_RMPipe); ElbowRadius(ND_RMPipe)] + Elbow1_Origin
RMTee_Origin := [0 m; ShortTeeLength(ND_RMPipe); L_RMPipeVertLower + ShortTeeLength(ND_RMPipe)] + PipeVertLower_Origin
L_EtExitOuter := Et_Origin[1] - RMTee_Origin[1] + SocketDepth(ND_RMPipe)
PipeVertUpper_Origin := [0 m; -ShortTeeLength(ND_RMPipe); ShortTeeLength(ND_RMPipe)] + RMTee_Origin
WeirPipe_Origin := [□; □; □]  # error: This placeholder is empty.
# don't forget micromix plate!!!
ND_EtFloat = 0.1524 m
S_EtFloat = 0.1 m
# x is the width
# y is the length
# z is the height
L_Et = 4.08288 m
Z_EtTop = 2.3943 m
Et_Dim := [L_Et; W_Et; Z_EtTop - Z_Et] = [4.08288; 0.45; 1.35088] m
EtHopper_Origin := [Et_Origin[0]; Et_Origin[1] + W_Et; Et_Origin[2]] = [0.15; 9.97852; 1.04342] m
EtHopper3_Origin := [Et_Origin[0] - L_EtHopper; Et_Origin[1] + W_Et; Et_Origin[2]] = [-1.17763; 9.97852; 1.04342] m
# Right side of 1st hopper
Hopper1_Farcorner := [Et_Origin[0] - 1/2*L_EtHopper + ConRadius(ND_EtDrain) + 5 cm; Et_Origin[1]; Z_EtHopper] = [-0.410473; 9.52853; 2.08984] m
Hopper2_Farcorner := [
    Et_Origin[0] - W_Et + 2*(ConRadius(ND_EtDrain) + 5 cm);
    Et_Origin[1] + W_Et + L_EtHopper;
    Z_EtHopper
] = [-0.09332; 11.3062; 2.08984] m  # backside  of 1st hopper
# Left side of 1st hopper
Hopper3_Farcorner := [Et_Origin[0] - 1/2*L_EtHopper - ConRadius(ND_EtDrain) - 5 cm; Et_Origin[1]; Z_EtHopper] = [-0.617153; 9.52853; 2.08984] m
EtHopper_CopyPoints :=
    for i ∈ 0 .. N_EtHoppers - 2
        Et_Hopper.Array[i] ← [Et_Origin[0] - 2*T_ConcreteMin - (i + 1)*L_EtHopper; Et_Origin[1]; Et_Origin[2]]
    return Et_Hopper.Array
# Scripts
EtTankScript :=
    EntTankLayer ← layer_new("EntranceTank", ltgrey)
    EntTank ← Tank(Et_Origin, Et_Dim, T_PlantWall)
    FreezeEntTank ← FreezeLayer("EntranceTank")
    HopperLayer ← layer_new("EtHopper", blue)
    Hopper1 ← WedgeF(EtHopper_Origin, Hopper1_Farcorner, [0; 0; 0]*deg)
    Hopper2 ← WedgeF(EtHopper_Origin, Hopper2_Farcorner, [90; 0; 0]*deg)
    Hopper3 ← WedgeF(EtHopper3_Origin, Hopper3_Farcorner, [0; 0; 0]*deg)
    UnionHopper ← union_allA
    GroupHopper ← GroupAll("EtHopper")
    CopyEtHopper ← CopyGroup("EtHopper", Et_Origin, EtHopper_CopyPoints)
    Ledge ← BoxF(EtHopper3_Origin, EtHopper3_Origin - [2*T_ConcreteMin; W_Et; -H_EtHopper], [0; 0; 0]*deg)
    FreezeHopper ← FreezeLayer("EtHopper")
    FirstCylinder ← CylinderF([-L_EtHopper/2; ConRadius(ND_EtDrain) + S_Elbow; 0] + Et_Origin, ConRadius(ND_EtDrain), 1 m, [0; 90]*deg)
    for i ∈ 1 .. N_EtHoppers - 1
        Cylinder ← stack(Cylinder, CylinderF([-L_EtHopper/2 - L_EtHopper*i - 2*T_ConcreteMin; ConRadius(ND_EtDrain) + S_Elbow; 0] + Et_Origin, ConRadius(ND_EtDrain), 1 m, [0; 90]*deg))
    GroupCylinders ← GroupAll("DeleteMe")
    SubtractCylinders ← SubtractF(["EtHopper"], "DeleteMe")
    return stack(EntTankLayer, EntTank, FreezeEntTank, HopperLayer, Hopper1, Hopper2, Hopper3, UnionHopper, GroupHopper, CopyEtHopper, Ledge, FreezeHopper, FirstCylinder, Cylinder, GroupCylinders, SubtractCylinders)
RMScript :=
    RMPipeLayer ← layer_new("RMPipe", blue)
    PipeHorizLower ← PipeF(PipeHorizLower_Origin, L_RMPipeHorizLower, [270; 0]*deg, ND_RMPipe, EN_PipeSpec)
    PipeVertLower ← PipeF(PipeVertLower_Origin, L_RMPipeVertLower, [0; 90]*deg, ND_RMPipe, EN_PipeSpec)
    FreezeRMPipe ← FreezeLayer("RMPipe")
    RMTeePipeLayer ← layer_new("RMTeePipe", blue)
    PipeVertUpper ← PipeF(PipeVertUpper_Origin, L_RMPipeVertPipeUpper, [0; 90]*deg, ND_RMPipe, EN_PipeSpec)
    FreezeRMTeePipe ← FreezeLayer("RMTeePipe")
    RMElbowLayer ← layer_new("RMElbow", green)
    Elbow ← ElbowF(Elbow1_Origin, [0; 90; 0]*deg, ND_RMPipe, EN_PipeSpec)
    FreezeRMElbow ← FreezeLayer("RMElbow")
    RMTeeLayer ← layer_new("RMTee", green)
    RMTee ← TeeF(RMTee_Origin, [0; 90; 0]*deg, ND_RMPipe, EN_PipeSpec)
    FreezeRMTee ← FreezeLayer("RMTee")
    return stack(RMPipeLayer, PipeHorizLower, PipeVertLower, FreezeRMPipe, RMTeePipeLayer, PipeVertUpper, FreezeRMTeePipe, RMElbowLayer, Elbow, FreezeRMElbow, RMTeeLayer, RMTee, FreezeRMTee)
# Change ExitCoupling and ExitPipeInner to SUBF functions after getting Akta's code!
# did not add (N)LFOM yet!!!
EtWaterExitScript :=
    EtExitPipeLayer ← layer_new("EtExitPipe", blue)
    ExitPipeOuter ← PipeF(RMTee_Origin, L_EtExitOuter, [270; 0]*deg, ND_RMPipe, EN_PipeSpec)
    ExitPipeInner ← PipeF(RMTee_Origin + [0 m; L_EtExitOuter + CouplingLength(ND_RMPipe) - 2*SocketDepth(ND_RMPipe); 0 m], L_EtExitInner, [270; 0]*deg, ND_RMPipe, EN_PipeSpec)
    FreezeEtExitPipes ← FreezeLayer("EtExitPipe")
    ExitCouplingLayer ← layer_new("EtExitCoupling", green)
    ExitCoupling ← CouplingF(RMTee_Origin + [0 m; L_EtExitOuter + CouplingLength(ND_RMPipe) - 2*SocketDepth(ND_RMPipe); 0 m], [90; 0]*deg, ND_RMPipe, EN_PipeSpec)
    FreezeExitCoupling ← FreezeLayer("EtExitCoupling")
    ExitElbowLayer ← layer_new("EtExitElbow", green)
    ExitElbow ← ElbowF(RMTee_Origin + [0 m; L_EtExitOuter + L_EtExitInner + CouplingLength(ND_RMPipe) - 2*SocketDepth(ND_RMPipe); 0 m], [0; 90; 0]*deg, ND_RMPipe, EN_PipeSpec)
    FreezeExitElbow ← FreezeLayer("EtExitElbow")
    return stack(EtExitPipeLayer, ExitPipeOuter, ExitPipeInner, FreezeEtExitPipes, ExitCouplingLayer, ExitCoupling, FreezeExitCoupling, ExitElbowLayer, ExitElbow, FreezeExitElbow)
# Must change coupling and pipe to "SUBF" when possible!!!
EtWeirScript :=
    ElbowLayer ← layer_new("EtWeirElbow", green)
    WeirElbow ← ElbowF([-L_EtHopper/2; ConRadius(ND_RMPipe) + S_Elbow; ConRadius(ND_EtOverflow)*tan(AN_EtSlope)] + Et_Origin, [0; 270; 270]*deg, ND_EtOverflow, EN_PipeSpec)
    FreezeElbow ← FreezeLayer("EtWeirCoupling")
    WeirLayer ← layer_new("EtWeirPipe", blue)
    WeirPipe ← PipeF([-L_EtHopper/2; ConRadius(ND_RMPipe) + S_Elbow; ConRadius(ND_EtOverflow)*tan(AN_EtSlope)] + Et_Origin, L_EtWeir, [0; 90]*deg, ND_EtOverflow, EN_PipeSpec)
    FreezeWeir ← FreezeLayer("EtWeirPipe")
    return stack(ElbowLayer, WeirElbow, FreezeElbow, WeirLayer, WeirPipe, FreezeWeir)
# need SUBFs here too!!!
# add chimney stops when possible
# will this loop work if we only have two hoppers?
EtLeftDrainScript :=
    DrainLayer ← layer_new("EtDrains", green)
    Coupling ← CouplingSUBF([-L_EtHopper/2; ConRadius(ND_EtDrain) + S_Elbow; -SocketDepth(ND_EtDrain)] + Et_Origin, [0; 270]*deg, ND_EtDrain, EN_PipeSpec, ["EntranceTank"])
    Elbow ← ElbowSUBF([
        -L_EtHopper/2;
        ConRadius(ND_EtDrain) + S_Elbow;
        {
            -CouplingLength(ND_EtDrain) - SocketDepth(ND_EtDrain) if CouplingLength(ND_EtDrain) ≥ T_PlantWall
            -T_PlantWall - SocketDepth(ND_EtDrain) otherwise
        }
    ] + Et_Origin, [0; 0; 270]*deg, ND_EtDrain, EN_PipeSpec, ["EntranceTank"])
    Local ← stack(DrainLayer, Coupling, Elbow)
    for i ∈ 1 .. N_EtHoppers - 1
        Local ← stack(Local, CouplingSUBF([
            -L_EtHopper/2 - L_EtHopper*i - 2*T_ConcreteMin;
            ConRadius(ND_EtDrain) + S_Elbow;
            -SocketDepth(ND_EtDrain)
        ] + Et_Origin, [0; 270]*deg, ND_EtDrain, EN_PipeSpec, ["EntranceTank"]))
        Local ← stack(Local, TeeSUBF([
            -L_EtHopper/2 - L_EtHopper*i - 2*T_ConcreteMin;
            ConRadius(ND_EtDrain) + S_Elbow;
            {
                -CouplingLength(ND_EtDrain) - SocketDepth(ND_EtDrain) - ElbowRadius(ND_EtDrain) if CouplingLength(ND_EtDrain) ≥ Et_Origin[2] - T_PlantWall - SocketDepth(ND_EtDrain) - ElbowRadius(ND_EtDrain) + ShortTeeLength(ND_EtDrain)
                (-T_PlantWall - SocketDepth(ND_EtDrain) - ElbowRadius(ND_EtDrain) + ShortTeeLength(ND_EtDrain)) otherwise
            }
        ] + Et_Origin, [0; 0; 90]*deg, ND_EtDrain, EN_PipeSpec, ["EntranceTank"]))
    FreezeElbow ← FreezeLayer("EtDrains")
    PipeLayer ← layer_new("EtDrainPipe", blue)
    DrainPipe ← PipeF([
        -L_EtHopper/2 - ElbowRadius(ND_EtDrain);
        ConRadius(ND_EtDrain) + S_Elbow;
        {
            -CouplingLength(ND_EtDrain) - SocketDepth(ND_EtDrain) if CouplingLength(ND_EtDrain) - ElbowRadius(ND_EtDrain) ≥ T_PlantWall
            -T_PlantWall - SocketDepth(ND_EtDrain) - ElbowRadius(ND_EtDrain) otherwise
        }
    ] + Et_Origin, L_EtHopper - ElbowRadius(ND_EtDrain) - ShortTeeLength(ND_EtDrain) + 2*T_ConcreteMin, [0; 0]*deg, ND_EtDrain, EN_PipeSpec)
    ElbowNipple ← PipeF([
        -L_EtHopper/2;
        ConRadius(ND_EtDrain) + S_Elbow;
        -CouplingLength(ND_EtDrain) + SocketDepth(ND_EtDrain)
    ] + Et_Origin, {
        (2*SocketDepth(ND_EtDrain)) if (CouplingLength(ND_EtDrain) ≥ T_PlantWall)
        T_PlantWall - CouplingLength(ND_EtDrain) + 2*SocketDepth(ND_EtDrain)
    }, [0; 270]*deg, ND_EtDrain, EN_PipeSpec)
    FreezePipes ← FreezeLayer("EtDrainPipe")
    Local2 ← stack(PipeLayer, DrainPipe, ElbowNipple, FreezePipes)
    return stack(Local, FreezeElbow, Local2)
    = [
        "-layer m EtDrains";
        "c t 0,255,0";
        "EtDrains";
        "  ";
        "_zoom w -0.62383,9.56852,1.05076 -0.4038,9.69521,0.94408";
        "_cylinder -0.51381,9.63187,0.99742 0.05334 c -0.46781,9.63187,0.99742";
        "_cylinder -0.56783,9.63187,0.99742 0.05334 c -0.52183,9.63187,0.99742";
        "_cylinder -0.52183,9.63187,0.99742 0.04445 c -0.51381,9.63187,0.99742";
        "_union -0.46781,9.57852,0.99742 -0.56783,9.57852,0.99742 -0.51381,9.58742,0.99742 ";
        "rotate3d l  y -0.51381,9.63187,0.99742 270"
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    ]
# [component: inputs stack(EtTankScript, RMScript, EtLeftDrainScript)]
