# Automated Design: AutoCAD: Entrance Tank
# References
# [reference: MasterProgram.xmcd]
# [reference: couplingsubtract.xmcd]
H_EtFlocConnect := 5 cm  # Dimensions of connection between entrance tank and floc tank
W_EtFlocConnect := S_FlocBaffle[0] = 0.155277 m
B_EtFlocConnect := T_PlantWall = 0.15 m
EtFlocConnect_Dim := [W_EtFlocConnect; B_EtFlocConnect; H_EtFlocConnect] = [0.155277; 0.15; 0.05] m
mod(N_FlocChannels, 2) = 1
W_Sed = 2 m
ZW_Et := HW_FlocStart + HL_Lfom + H_LfomFreefall + HL_EtFloc = 2.15557 m
Z_Et := H_Sed + HL_PlantTotal = 2.21726 m
H_Et := Z_Et - H_Sed - H_InletChannel + H_SedWeirExit + 2*ND_RMPipe = 0.964994 m
HW_EtMax := HW_EtMin + HL_Lfom
# Inputs
Et_origin[0] :=
    Plant_Origin[0] if mod(N_FlocChannels, 2) == 1
    (Plant_Origin[0] - L_Sed) otherwise
Et_origin :=
    origin ← [
        Et_origin[0];
        Plant_Origin[1] + (N_SedTanks*(W_Sed + T_PlantWall)) + (N_FlocChannels*(W_FlocChannel + T_PlantWall));
        Plant_Origin[2]
    ]
    return origin
    = [0; 7.55; 0] m
Et_dim := [L_Et; W_Et; H_Et] = [1.11098; 1.11098; 0.964994] m
EtFlocConnect_origin :=
    origin ← [Et_origin[0] - L_Et; Et_origin[1] - T_PlantWall; Et_origin[2] + H_Et - H_EtFlocConnect] if mod(N_FlocChannels, 2) == 0
    origin ← [Et_origin[0] - W_EtFlocConnect; Et_origin[1] - T_PlantWall; Et_origin[2] + H_Et - H_EtFlocConnect] if mod(N_FlocChannels, 2) == 1
    return origin
    = [-0.155277; 7.4; 0.914994] m
RM_origin := [
    Et_origin[0] - L_Et/2;
    (Et_origin[1] + W_Et) - T_PlantWall - ND_RMPipe;
    Plant_Origin[0] + T_ConcreteMin + ElbowRadius(ND_PltWeir) + innerD(ND_PltWeir, EN_PipeSpec) - CapHeight(ND_RMPipe)
] = [-0.555492; 8.10458; 0.018504] m  # Also subtracting the height of the cap from the origin.
# Also in turn will need to subtract the height of the cap from the length of the pipe in tank
Couple_origin := [RM_origin[0]; RM_origin[1]; Et_origin[2]] = [-0.555492; 8.10458; 0] m
RM_Elbow1origin := [
    RM_origin[0];
    RM_origin[1] - ElbowRadius(ND_RMPipe);
    RM_origin[2] - L_PipeInTank + CapHeight(ND_RMPipe)
] = [-0.555492; 7.49498; -1.07525] m
RM_HorizPipeorigin := [RM_origin[0]; RM_Elbow1origin[1]; RM_Elbow1origin[2] - ElbowRadius(ND_RMPipe)]
RM_Elbow2origin := [
    RM_origin[0] + 3*ND_RMPipe/2;
    RM_Elbow1origin[1] - (L_RMPipe - L_PipeInTank - (2*(ElbowRadius(ND_PltWeir) + innerD(ND_PltWeir, EN_PipeSpec)) + (W_Et/2 - ElbowRadius(ND_PltWeir))));
    RM_origin[2] - L_PipeInTank + CapHeight(ND_RMPipe) - ElbowRadius(ND_RMPipe)
] = [0.0541079; 3.21528; -1.68485] m
RM_ToFlocorigin := [RM_Elbow2origin[0]; RM_Elbow2origin[1] - ElbowRadius(ND_RMPipe); RM_Elbow2origin[2]]
# Scripts
EtTankScript :=
    layernewt ← layer_new("entrancetank", ltgrey)
    tank ← Tank(Et_origin, Et_dim, T_EtWall)
    layersett ← layer_set("0")
    layerfreezet ← layer_freeze("entrancetank")
    one ← stack(layernewt, tank, layersett, layerfreezet)
    layer3 ← layer_set("entrancetank")
    layerset3 ← layer_set("0")
    layerthaw3 ← layer_thaw("entrancetank")
    viewtop ← viewtop1
    layerfreeze3 ← layer_freeze("entrancetank")
    two ← stack(layer3, layerset3, layerthaw3, viewtop, layerfreeze3)
    three ← stack(one, two)
    return three
couplingIDpipesubtract(o, ND_pipe, L, EN, o_wall, layer_wall, layer_coupling)
ND_RMPipe = 0.4064 m
outercappoint := [RM_origin[0] + ND_RMPipe/2; RM_origin[1]; RM_origin[2]] = [-0.352292; 8.10458; 0.018504] m
MacroMODiameter/2 = 0.149545 m
InnerPipeDiameter = 0.344526 m
innercappoint := [RM_origin[0] + MacroMODiameter/2; RM_origin[1]; RM_origin[2] - zc] = [-0.405947; 8.10458; 0.008504] m
RMScript :=
    layernewr ← layer_new("rapidmixer", blue)
    pipe ← Pipe(RM_origin, ND_RMPipe, -L_PipeInTank + CapHeight(ND_RMPipe), EN_PipeSpec)
    layersetr ← layer_set("0")
    layerfreezer ← layer_freeze("rapidmixer")
    viewtop ← viewtop1
    layernewo ← layer_new("macroorifice", red)
    cap ← cap(RM_origin, ND_RMPipe, EN_PipeSpec)
    orificecylinder ← cylinderC(RM_origin, MacroMODiameter/2, CapHeight(ND_RMPipe) + zc)
    subtractcap ← subtractD(outercappoint, innercappoint)
    layerseto ← layer_set("0")
    layerfreezeo ← layer_freeze("macroorifice")
    layernews ← layer_new("elbow1", green)
    elbow_1 ← elbow(RM_Elbow1origin, ND_RMPipe, EN_PipeSpec)
    rotate ← rotate_3dAll(RM_Elbow1origin, "y", 0)
    layersets ← layer_set("0")
    layerfreezes ← layer_freeze("elbow1")
    layernewp ← layer_new("horizpipe", blue)
    horizpipe ← Pipe(RM_HorizPipeorigin, ND_RMPipe, L_RMPipe - L_PipeInTank - (2*(ElbowRadius(ND_PltWeir) + innerD(ND_PltWeir, EN_PipeSpec)) + (W_Et/2 - ElbowRadius(ND_PltWeir))), EN_PipeSpec)
    rotatep ← rotate_3dAll(RM_HorizPipeorigin, "x", 0)
    layersetp ← layer_set("0")
    layerfreezep ← layer_freeze("horizpipe")
    layernewe ← layer_new("elbow2", green)
    elbow_2 ← elbow(RM_Elbow2origin, ND_RMPipe, EN_PipeSpec)
    rotatee ← rotate_3dAll(RM_Elbow2origin, "z", 0)
    rotatef ← rotate_3dAll(RM_Elbow2origin, "y", 0)
    rotateg ← rotate_3dAll(RM_Elbow2origin, "x", 0)
    layersete ← layer_set("0")
    layerfreezee ← layer_freeze("elbow2")
    layernewf ← layer_new("pipetofloc", blue)
    pipetofloc ← Pipe(RM_ToFlocorigin, ND_RMPipe, W_Et/2 - ElbowRadius(ND_RMPipe) + T_PlantWall, EN_PipeSpec)
    rotateh ← rotate_3dAll(RM_ToFlocorigin, "y", 0)
    layersetf ← layer_set("0")
    layerfreezef ← layer_freeze("pipetofloc")
    one ← stack(layernewr, pipe, layersetr, layerfreezer, viewtop, layernewo, cap, orificecylinder, subtractcap, layerseto, layerfreezeo, layernews, elbow_1, rotate, layersets, layerfreezes, layernewp, horizpipe, rotatep, layersetp, layerfreezep, layernewe, elbow_2, rotatee, rotateg, rotatee, rotatef, rotatef, rotatef, layersete, layerfreezee, layernewf, pipetofloc, rotateh, layersetf, layerfreezef)
    return one
# Top of pipe starts at the height of the weir at the end
H_Sed - H_InletChannel + HW_InletChannel = 1.6208 m
# First orifice is a cap on the top of the pipe
AC_EntranceTank := stack(EtTankScript, RMScript)
# [component: inputs AC_EntranceTank]
# These are the lines of code that should work for the couple. Thickness needs to be resovled though:
layernewc ← layer_new("couple", red)
couple ← couplingIDpipesubtract(Couple_origin, InnerPipeDiameter, T_EtWall, EN_PipeSpec, Et_origin, "entrancetank", "couple")
layersetc ← layer_set("0")
layerfreezec ← layer_freeze("couple")
