# Automated Design: AutoCAD: Entrance Tank
# References
# [reference: MasterProgram.xmcd]
# Inputs
Et_origin := [
    Plant_Origin[0] + W_MpWalkway + W_Et + 2*T_PlantWall;
    Plant_Origin[1] + (N_SedTanks*(W_Sed + T_PlantWall)) + (N_FlocChannels*(W_FlocChannel + T_PlantWall));
    Z_EtTop - H_Et
] = [2.95831; 3.63; 1.07745] m
VentPipe_Origin := [
    Et_origin[0] - L_Et/2;
    Et_origin[1] + W_Et/2 - .5*ND_RMPipe + .0051 m + .0468/2*m;
    Z_SedWeirExit - 2*D_RMPipe - SocketDepth(ND_RMPipe) + .6852 m - 1.5*ND_RMPipe
] = [2.12916; 4.33526; 1.22945] m
VentPipe2_Origin := [
    Et_origin[0] - L_Et/2;
    Et_origin[1] + W_Et/2 - .5*ND_RMPipe + .0051 m - 15 cm - .0191 m;
    Z_SedWeirExit - 2*D_RMPipe - SocketDepth(ND_RMPipe) + .6852 m - 1.5*ND_RMPipe + .0191 m
] = [2.12916; 4.14276; 1.24855] m
VentElbow_Origin := [
    Et_origin[0] - L_Et/2;
    Et_origin[1] + W_Et/2 - .5*ND_RMPipe + .0051 m - 15 cm;
    Z_SedWeirExit - 2*D_RMPipe - SocketDepth(ND_RMPipe) + .6852 m - 1.5*ND_RMPipe
] = [2.12916; 4.16186; 1.22945] m
VentCoupling_Origin := [
    Et_origin[0] - L_Et/2;
    Et_origin[1] + W_Et/2 - .5*ND_RMPipe + .0051 m + .0468 m;
    Z_SedWeirExit - 2*D_RMPipe - SocketDepth(ND_RMPipe) + .6852 m - 1.5*ND_RMPipe
] = [2.12916; 4.35866; 1.22945] m
RMPipe_Origin + [
    0;
    -ElbowRadius(ND_RMPipe);
    -ElbowRadius(ND_RMPipe) + ConRadius(ND_RMPipe) - CouplingLength(ND_RMPipe) - L_RMPipeBelow
] = [212.916; 400.196; 23.662] cm
Et_dim := [L_Et; W_Et; H_Et] = [1.65831; 1.65831; 1.10307] m
RMPipe_Origin := [Et_origin[0] - L_Et/2; Et_origin[1] + W_Et/2; Z_SedWeirExit - 2*D_RMPipe - SocketDepth(ND_RMPipe)] = [212.916; 445.916; 100.145] cm
L_RMPipeBelow := Z_EtTop - H_Et - Z_FlocTank - ConRadius(ND_RMPipe) - ElbowRadius(ND_RMPipe) - CouplingLength(ND_RMPipe) + SocketDepth(ND_RMPipe) = 0.258098 m
RMElbow1_Origin := [RMPipe_Origin[0]; RMPipe_Origin[1]; Z_FlocTank + ConRadius(ND_RMPipe) + ElbowRadius(ND_RMPipe)] = [2.12916; 4.45916; 0.65151] m
L_EtPipe :=
    (RMPipe_Origin[0] + ConRadius(ND_RMPipe) - 2*ElbowRadius(ND_RMPipe)) if mod(N_FlocChannels, 2) == 1
    (W_Et/2 - ElbowRadius(ND_RMPipe) + 2*T_PlantWall + W_MpWalkway + L_Sed - ConRadius(ND_RMPipe) - ElbowRadius(ND_RMPipe)) otherwise
RMElbow2_Origin := [
    {
        (-L_Sed + ElbowRadius(ND_RMPipe) + ConRadius(ND_RMPipe)) if mod(N_FlocChannels, 2) == 0
        (ElbowRadius(ND_RMPipe) - ConRadius(ND_RMPipe)) otherwise
    };
    RMPipe_Origin[1];
    Z_EtTop - H_Et - CouplingLength(ND_RMPipe) - L_RMPipeBelow - ElbowRadius(ND_RMPipe) + SocketDepth(ND_RMPipe)
]
L_RMPipe3 := RMPipe_Origin[1] - Et_origin[1] + T_PlantWall - (ElbowRadius(ND_RMPipe) + SocketDepth(ND_RMPipe))
RMPipeCap_Origin := [RMPipe_Origin[0]; RMPipe_Origin[1]; Z_SedWeirExit]
# Scripts
EtTankScript :=
    Layer ← layer_new("EntranceTank", ltgrey)
    Tank ← Tank(Et_origin, Et_dim, T_EtWall)
    Freeze ← FreezeLayer("EntranceTank")
    return stack(Layer, Tank, Freeze)
RMPipeScript :=
    Layer ← layer_new("RMPipe", blue)
    VertPipeAboveTank ← PipeF(RMPipe_Origin, 2*D_RMPipe, [0; 90]*deg, ND_RMPipe, EN_PipeSpec)
    VertPipeBelowTank ← PipeF(RMElbow1_Origin, L_RMPipeBelow, [0; 90]*deg, ND_RMPipe, EN_PipeSpec)
    VentPipe2 ← PipeF(VentPipe2_Origin, 200 cm, [0; 90]*deg, .5 in, 0)
    HorizPipeBetweenElbows ← PipeF([
        RMElbow2_Origin[0] - ElbowRadius(ND_RMPipe);
        RMElbow2_Origin[1] - ElbowRadius(ND_RMPipe);
        RMElbow2_Origin[2]
    ], L_RMPipe3, [90; 0]*deg, ND_RMPipe, EN_PipeSpec)
    ventPipe ← PipeF(VentPipe_Origin, 15 cm + .0468/2*m, [90; 0]*deg, .5 in, 0)
    PipeToFlocTank ← PipeF([
        -ElbowRadius(ND_RMPipe) + RMPipe_Origin[0];
        RMPipe_Origin[1];
        Z_EtTop - H_Et - CouplingLength(ND_RMPipe) - L_RMPipeBelow - ElbowRadius(ND_RMPipe) + SocketDepth(ND_RMPipe)
    ], L_EtPipe, [0; 0]*deg, ND_RMPipe, EN_PipeSpec)
    Freeze ← FreezeLayer("RMPipe")
    return stack(Layer, VertPipeAboveTank, VertPipeBelowTank, VentPipe2, HorizPipeBetweenElbows, ventPipe, PipeToFlocTank, Freeze)
RMPipeCapScript :=
    LayerNew ← layer_new("MicroMixOrifice", red)
    MakeCap ← CapF(RMPipeCap_Origin, [0; 270]*deg, ND_RMPipe)
    FreezeCap ← FreezeLayer("MicroMixOrifice")
    Orifice ← CylinderF(RMPipeCap_Origin + [0; 0; -ND_RMPipe], D_RMMicroOrifice/2, 2*ND_RMPipe, [0; 90]*deg)
    Group ← GroupAll("DeleteMe")
    SubtractOrifice ← SubtractF(["MicroMixOrifice"], "DeleteMe")
    return stack(LayerNew, MakeCap, FreezeCap, Orifice, Group, SubtractOrifice)
RMCouplingScript :=
    NewLayer ← layer_new("RMCoupling", green)
    CouplingInEt ← CouplingSUBF(RMPipe_Origin, [0; 270]*deg, ND_RMPipe, EN_PipeSpec, ["EntranceTank"])
    CouplingInFlocTank ← CouplingSUBF([
        RMElbow2_Origin[0] - ElbowRadius(ND_RMPipe);
        RMElbow2_Origin[1] - ElbowRadius(ND_RMPipe) - L_RMPipe3;
        RMElbow2_Origin[2]
    ], [90; 0]*deg, ND_RMPipe, EN_PipeSpec, ["FlocTank"])
    ventCoupling ← CouplingSUBF(VentPipe_Origin, [90; 0]*deg, .5 in, 0, ["EntranceTank"])
    FreezeCoupling ← FreezeLayer("RMCoupling")
    return stack(NewLayer, CouplingInEt, CouplingInFlocTank, ventCoupling)
RMElbowScript :=
    NewLayer ← layer_new("RMElbow", green)
    ElbowInXZPlane ← ElbowF(RMElbow1_Origin, [0; 0; 270]*deg, ND_RMPipe, EN_PipeSpec)
    ventElbow ← ElbowF(VentElbow_Origin, [90; 270; 270]*deg, .5 in, 0)
    ElbowInXYPlane ← ElbowF(RMElbow2_Origin, [90; 0; 0]*deg, ND_RMPipe, EN_PipeSpec)
    Freeze ← FreezeLayer("RMElbow")
    return stack(NewLayer, ElbowInXZPlane, ventElbow, ElbowInXYPlane, Freeze)
AC_EntranceTank := stack(EtTankScript, RMPipeScript, RMPipeCapScript, RMCouplingScript, RMElbowScript)
# [component: inputs AC_EntranceTank]
