# Entrance Tank AutoCAD
# Entrance Tank Concrete
Et_Origin := [
    Plant_Origin[0];
    Floc_Origin[1] + (N_FlocChannels*(W_FlocChannel + T_PlantWall)) + W_EtWalkway + T_PlantWall;
    Z_Et
] = [0; 11.85; 1.33346] m
Et_Dim := [L_Et; W_Et; H_Et] = [3.79493; 0.808; 1.2811] m
EtHopper_Origin := [Et_Origin[0]; Et_Origin[1] + W_Et; Et_Origin[2]] = [0; 12.658; 1.33346] m
EtHopper3_Origin := [Et_Origin[0] - L_EtHopperFirst; Et_Origin[1] + W_Et; Et_Origin[2]] = [-1.1827; 12.658; 1.33346] m
Hopper1_Farcorner := [Et_Origin[0] - 1/2*L_EtHopperFirst + ConRadius(ND_EtDrain) + S_Fitting; Et_Origin[1]; Z_EtHopper] = [-0.490551; 11.85; 1.82401] m
Hopper2_Farcorner := [
    Et_Origin[0] - W_Et + max(2*(ConRadius(ND_EtDrain) + S_Fitting), W_Et - H_EtHopperBack/tan(AN_EtSlope));
    Et_Origin[1] + W_Et + L_EtHopperFirst;
    H_EtHopperBack + Z_Et
] = [-0.6064; 13.8407; 1.93986] m
Hopper3_Farcorner := [Et_Origin[0] - 1/2*L_EtHopperFirst - ConRadius(ND_EtDrain) - S_Fitting; Et_Origin[1]; Z_EtHopper] = [-0.692151; 11.85; 1.82401] m
EtHopper_CopyPoints :=
    for i ∈ 0 .. N_EtHoppers - 2
        Et_Hopper.Array[i] ← [Et_Origin[0] - T_EtTrashLedge - (i + 1)*L_EtHopperFirst; Et_Origin[1]; Et_Origin[2]]
    return Et_Hopper.Array
EntTankLayer := layer_new("EtTankCon", ltgrey)
EntTank := Tank(Et_Origin, Et_Dim + [0 m; W_EtOverflowChannel + T_EtWeir; 0 m], T_PlantWall)
EtOverflowChannelBase := BoxF(Et_Origin + [0 m; W_Et; 0 m], Et_Origin + [
    -L_Et;
    W_Et + W_EtOverflowChannel + T_EtWeir;
    H_Et - HW_EtOverflowChannel - H_PlantFreeboard - H_EtWeirFreefall
], [0; 0; 0]*deg)
EtOverflowWeir := BoxF(Et_Origin + [0 m; W_Et; H_Et - HW_EtOverflowChannel - H_PlantFreeboard - H_EtWeirFreefall], Et_Origin + [-L_Et; W_Et + T_EtWeir; HW_Et], [0; 0; 0]*deg)
UnionEntTankPieces := Union_All
FreezeEntTank := FreezeLayer("EtTankCon")
HopperLayer := layer_new("EtHopperCon", blue)
Hopper3 := WedgeF(EtHopper3_Origin, Hopper3_Farcorner, [0; 0; 0]*deg)
Hopper2 := WedgeF(EtHopper_Origin, Hopper2_Farcorner, [90; 0; 0]*deg)
GroupHopper := GroupAll("EtHopperCon")
CopyEtHopper := CopyGroup("EtHopperCon", Et_Origin, submatrix(EtHopper_CopyPoints, 0, N_EtHoppers - 3, 0, 0))
Hopper1 := WedgeF(EtHopper_Origin, Hopper1_Farcorner, [0; 0; 0]*deg)
GroupRightHopper := GroupLast("EtHopperLeft")
CopyRightHopper := CopyGroup("EtHopperLeft", Et_Origin, EtHopper_CopyPoints)
LastHopper := WedgeF([Et_Origin[0] - L_Et; Et_Origin[1]; Et_Origin[2]], [L_EtHopperMin/2 - ConRadius(ND_EtDrain) - S_Fitting; Et_Origin[1]; H_EtHopperLast] + [Et_Origin[0] - L_Et; W_Et; Et_Origin[2]], [0; 0; 0]*deg)
LastBackHopper := WedgeF([Et_Origin[0] - L_Et; Et_Origin[1] + W_Et; Et_Origin[2]], [
    Et_Origin[0] - L_Et - W_Et + max(2*(ConRadius(ND_EtDrain) + S_Fitting), W_Et - H_EtHopperBack/tan(AN_EtSlope));
    Et_Origin[1] + W_Et - L_EtHopperLast;
    Et_Origin[2] + H_EtHopperBack
], [90; 0; 0]*deg)
Ledge := BoxF(EtHopper3_Origin, EtHopper3_Origin - [T_EtTrashLedge; W_Et; -H_EtHopperFirst], [0; 0; 0]*deg)
FreezeHopper := FreezeLayer("EtHopperCon")
TrashRackSlot1 := BoxF(EtHopper3_Origin + [0 m; 2*D_Rebar; H_EtHopperFirst - 2*D_Rebar], EtHopper3_Origin + [-2*D_Rebar; -W_Et - 2*D_Rebar; H_EtHopperFirst + H_EtTop + H_PlantFreeboard + zc], [0; 0; 0]*deg)
TrashRackSlot2 := BoxF(EtHopper3_Origin + [-2*D_Rebar - T_ConcreteMin; 2*D_Rebar; H_EtHopperFirst - 2*D_Rebar], EtHopper3_Origin + [-4*D_Rebar - T_ConcreteMin; -W_Et - 2*D_Rebar; H_EtHopperFirst + H_EtTop + H_PlantFreeboard + zc], [0; 0; 0]*deg)
GroupSlots := GroupAll("DeleteMe")
SubtractSlots := SubtractF(["EtTankCon"; "EtHopperCon"], "DeleteMe")
EtTankScript := stack(EntTankLayer, EntTank, EtOverflowChannelBase, EtOverflowWeir, UnionEntTankPieces, FreezeEntTank, HopperLayer, Hopper3, Hopper2, GroupHopper, CopyEtHopper, Hopper1, GroupRightHopper, CopyRightHopper, LastHopper, LastBackHopper, Ledge, FreezeHopper, TrashRackSlot1, TrashRackSlot2, GroupSlots, SubtractSlots)
# Trash Rack
TRLayer := layer_new("EtTrashrack", yellow)
HorizCylinder := CylinderF(EtHopper3_Origin + [-(1/2*D_Rebar); 2*D_Rebar; H_EtHopperFirst - 3/2*D_Rebar], D_Rebar/2, W_Et + 4*D_Rebar, [90; 0]*deg)
ViewRight := view("r")
ArrayHorizCylinder := ArrayLast(N_TRSpacesH + 1, 1, B_EtRebar)
ViewTop := view("t")
VertCylinder := CylinderF(EtHopper3_Origin + [-3/2*D_Rebar; 3/2*D_Rebar; H_EtHopperFirst - 2*D_Rebar], D_Rebar/2, (N_TRSpacesH + 1)*B_EtRebar - D_Rebar, [0; 90]*deg)
ArrayVertCyl := ArrayLast(1, N_TRSpacesV + 1, -B_EtRebar)
ArrayAll := array_all(1, 2, -T_ConcreteMin - 2*D_Rebar)
Freeze := FreezeLayer("EtTrashrack")
EtTrashRackScript := stack(TRLayer, HorizCylinder, ViewRight, ArrayHorizCylinder, ViewTop, VertCylinder, ViewRight, ArrayVertCyl, ViewTop, ArrayAll, Freeze)
# Rapid Mix Pipe and LFOM
# this is the upper elbow (connected to the LFOM)
RMElbow1_Origin := [
    Plant_Origin[0] - L_Sed + S_Fitting + ConRadius(ND_RMPipe);
    Et_Origin[1] + SocketDepth(ND_RMPipe);
    Z_EtExit
]
EtRMCoupling_Origin := RMElbow1_Origin - [0 m; 2*SocketDepth(ND_RMPipe); 0 m]
EtWeir_Origin := [
    Et_Origin[0] - S_Fitting - ConRadius(ND_EtOverflow);
    Et_Origin[1] + W_Et - ConRadius(ND_EtOverflow) - S_Fitting;
    Z_EtTop - H_PlantFreeboard
]
RMTee_Origin :=
    if CouplingLength(ND_RMPipe) < T_PlantWall
        [
            Plant_Origin[0] - L_Sed + ConRadius(ND_RMPipe) + S_Fitting;
            -T_PlantWall + EtRMCoupling_Origin[1];
            EtRMCoupling_Origin[2]
        ]
    otherwise
        [
            Plant_Origin[0] - L_Sed + ConRadius(ND_RMPipe) + S_Fitting;
            -CouplingLength(ND_RMPipe) + EtRMCoupling_Origin[1];
            EtRMCoupling_Origin[2]
        ]
RMElbow2_Origin := [
    RMTee_Origin[0];
    RMTee_Origin[1] - ShortTeeLength(ND_RMPipe) - ElbowRadius(ND_RMPipe);
    FlocCoupling_Origin[2]
]  # this is the lower elbow
L_RMPipeHorizLower := RMTee_Origin[1] - Floc_Origin[1] - N_FlocChannels*W_FlocChannel - ElbowRadius(ND_RMPipe) - ShortTeeLength(ND_RMPipe) - (T_PlantWall*(N_FlocChannels - 1) - CouplingLength(ND_RMPipe) + SocketDepth(ND_RMPipe))
L_RMPipeVertLower := Z_EtExit - ShortTeeLength(ND_RMPipe) - FlocCoupling_Origin[2] - ElbowRadius(ND_RMPipe)
L_RMPipeVert := RMElbow1_Origin[2] - ShortTeeLength(ND_RMPipe) - FlocCoupling_Origin[2] - ElbowRadius(ND_RMPipe)
L_RMFlocPipe := RMElbow2_Origin[1] - FlocCoupling_Origin[1] - CouplingLength(ND_RMPipe) + SocketDepth(ND_RMPipe)
L_RMExitPipe := 2*SocketDepth(ND_RMPipe)
L_RMExitPipe2 :=
    (2*SocketDepth(ND_RMPipe)) if (CouplingLength(ND_RMPipe) > T_PlantWall)
    (T_PlantWall - CouplingLength(ND_RMPipe) + 2*SocketDepth(ND_RMPipe)) otherwise
L_RMTeePipe := ZW_RMPipe + H_PlantFreeboard - Z_EtExit - ShortTeeLength(ND_RMPipe)
L_LfomPipe := Z_EtTop - Z_EtExit - ElbowRadius(ND_RMPipe)
ElbowLayer := layer_new("EtRmElbowPlu", green)
UpperElbow := ElbowSUBF(RMElbow1_Origin, [0; 90; 0]*deg, ND_RMPipe, PS_Default, ["EtTankCon"; "EtHopperCon"])
LowerElbow := ElbowF(RMElbow2_Origin, [0; 90; 0]*deg, ND_RMPipe, PS_Default)
FreezeElbow := FreezeLayer("EtRmElbowPlu")
RMCouplingLayer := layer_new("EtRmCouplingPlu", green)
ExitCoupling := CouplingSUBF(EtRMCoupling_Origin, [90; 0]*deg, ND_RMPipe, PS_Default, ["EtTankCon"; "EtHopperCon"])
FreezeRMEtCoupling := FreezeLayer("EtRmCouplingPlu")
PipeLayer := layer_new("EtRmPipePlu", blue)
ExitPipe := PipeSUBF(RMElbow1_Origin, L_RMExitPipe, [90; 0; 0]*deg, ND_RMPipe, PS_Default, ["EtTankCon"; "EtHopperCon"])
ExitPipe2 := PipeF(EtRMCoupling_Origin - [0 m; CouplingLength(ND_RMPipe) - 2*SocketDepth(ND_RMPipe); 0 m], L_RMExitPipe2, [90; 0; 0]*deg, ND_RMPipe, PS_Default)
RMPipeVert := PipeF(RMTee_Origin - [0 m; ShortTeeLength(ND_RMPipe); ShortTeeLength(ND_RMPipe)], L_RMPipeVert, [0; 270; 0]*deg, ND_RMPipe, PS_Default)
RMFlocPipe := PipeF(RMElbow2_Origin, L_RMFlocPipe, [90; 0; 0]*deg, ND_RMPipe, PS_Default)
RMTeePipe := PipeF(RMTee_Origin + [0 m; -ShortTeeLength(ND_RMPipe); ShortTeeLength(ND_RMPipe)], L_RMTeePipe, [0; 90; 0]*deg, ND_RMPipe, PS_Default)
FreezePipe := FreezeLayer("EtRmPipePlu")
RMTeeLayer := layer_new("EtRmTeePlu", green)
MakeTee := TeeF(RMTee_Origin, [0; 90; 0]*deg, ND_RMPipe, PS_Default)
FreezeTee := FreezeLayer("EtRmTeePlu")
RMScript := stack(ElbowLayer, UpperElbow, LowerElbow, FreezeElbow, RMCouplingLayer, ExitCoupling, FreezeRMEtCoupling, PipeLayer, ExitPipe, ExitPipe2, RMPipeVert, RMFlocPipe, RMTeePipe, FreezePipe, RMTeeLayer, MakeTee, FreezeTee)
LfomLayer := layer_new("EtLfomPlu", blue)
LfomPipe := PipeF(RMElbow1_Origin + [0 m; ElbowRadius(ND_RMPipe); ElbowRadius(ND_RMPipe)], L_LfomPipe, [0; 90; 0]*deg, ND_RMPipe, PS_Default)
FreezePipe := FreezeLayer("EtLfomPlu")
LfomOrifices :=
    Local ← stack(LfomLayer, LfomPipe, FreezePipe)
    for h ∈ 0 .. last(H_LfomOrifice)
        Local ← stack(Local, CylinderF([
            RMElbow1_Origin[0];
            RMElbow1_Origin[1] + ElbowRadius(ND_RMPipe);
            ZW_Et - HL_Flowmeasure + H_LfomOrifice[h]
        ], D_LfomOrifices/2, outerradius(ND_RMPipe) + zc, [2*asin(D_LfomOrifices/(2*outerradius(ND_RMPipe)))*(mod(h, 2) == 1) + 90 deg; 0]))
        Local ← stack(Local, ArrayLastPolar([
            RMElbow1_Origin[0];
            RMElbow1_Origin[1] + ElbowRadius(ND_RMPipe);
            ZW_Et - HL_Flowmeasure + H_LfomOrifice[h]
        ], N_LfomOrifices[h], (2*N_LfomOrifices[h] - 1)*2*asin(D_LfomOrifices/(2*outerradius(ND_RMPipe)))))
    return Local
GroupOrifices := GroupAll("DeleteMe")
SubtractOrifices := SubtractF(["EtLfomPlu"], "DeleteMe")
EtLfomScript := stack(LfomOrifices, GroupOrifices, SubtractOrifices)
# Hopper Drains
DrainCouplingLayer := layer_new("EtDrainCouplingsPlu", green)
DrainWeirCoupling := CouplingSUBF([-L_EtHopperFirst/2; ConRadius(ND_EtDrain) + S_Fitting; -SocketDepth(ND_EtDrain)] + Et_Origin, [0; 270]*deg, ND_EtDrain, PS_Default, ["EtTankCon"])
DrainCouplings :=
    Local ← stack(DrainCouplingLayer, DrainWeirCoupling)
    if N_EtHoppers ≥ 2
        for i ∈ 1 .. N_EtHoppers - 1
            Local ← stack(Local, CouplingSUBF([
                -L_EtHopperFirst/2 - L_EtHopperFirst*i - T_EtTrashLedge;
                ConRadius(ND_EtDrain) + S_Fitting;
                -SocketDepth(ND_EtDrain)
            ] + Et_Origin, [0; 270]*deg, ND_EtDrain, PS_Default, ["EtTankCon"]))
FreezeDrainCouplings := FreezeLayer("EtDrainCouplingsPlu")
DrainPipeLayer := layer_new("EtDrainPipesPlu", blue)
DrainPipe1 := PipeSUBF([
    -L_EtHopperFirst/2;
    ConRadius(ND_EtDrain) + S_Fitting;
    SocketDepth(ND_EtDrain) - CouplingLength(ND_EtDrain)
] + Et_Origin, T_PlantWall, [0; 270; 0]*deg, ND_EtDrain, PS_Default, ["EtTankCon"])
DrainPipes :=
    Local ← stack(FreezeDrainCouplings, DrainPipeLayer, DrainPipe1)
    for i ∈ 1 .. N_EtHoppers - 1
        if N_EtHoppers ≥ 2
            Local ← stack(Local, PipeSUBF([
                -L_EtHopperFirst/2 - L_EtHopperFirst*i - T_EtTrashLedge;
                ConRadius(ND_EtDrain) + S_Fitting;
                SocketDepth(ND_EtDrain) - CouplingLength(ND_EtDrain)
            ] + Et_Origin, T_PlantWall, [0; 270; 0]*deg, ND_EtDrain, PS_Default, ["EtTankCon"]))
FreezePipes := FreezeLayer("EtDrainPipesPlu")
StopperLayer := layer_new("EtDrainStoppersPlu", blue)
FirstStopper := PipeF([-L_EtHopperFirst/2; ConRadius(ND_EtDrain) + S_Fitting; -SocketDepth(ND_EtDrain)] + Et_Origin, H_Et - H_PlantFreeboard/2 + SocketDepth(ND_EtDrain), [0; 90; 0]*deg, ND_EtDrain, PS_Default)
StopperPipes :=
    Local ← stack(FreezePipes, StopperLayer, FirstStopper)
    if N_EtHoppers ≥ 2
        for i ∈ 1 .. N_EtHoppers - 1
            Local ← stack(Local, PipeF([
                -L_EtHopperFirst/2 - L_EtHopperFirst*i - T_EtTrashLedge;
                ConRadius(ND_EtDrain) + S_Fitting;
                -SocketDepth(ND_EtDrain)
            ] + Et_Origin, H_Et - H_PlantFreeboard/2 + SocketDepth(ND_EtDrain), [0; 90; 0]*deg, ND_EtDrain, PS_Default))
FreezeStopper := FreezeLayer("EtDrainStoppersPlu")
EtDrainsRight := stack(DrainCouplings, DrainPipes, StopperPipes, FreezeStopper)
ThawDrains := ThawMultiple(["EtTankCon"; "EtHopperCon"; "EtDrainCouplingsPlu"; "EtDrainPipesPlu"; "EtWeir"; "EtTrashrack"; "Cdc"; "CdcFittings"; "EtDrainStoppersPlu"])
MirrorDrains := Mirror3dAll("YZ", [Plant_Origin[0] - 1/2*L_Sed; 0 m; 0 m], "Y")
FreezeDrains := FreezeMultiple(["EtTankCon"; "EtHopperCon"; "EtDrainCouplingsPlu"; "EtDrainPipesPlu"; "EtWeir"; "EtTrashrack"; "Cdc"; "CdcFittings"; "EtDrainStoppersPlu"])
EtDrainsLeft := stack(ThawDrains, MirrorDrains, FreezeDrains)
# Overflow Drain Plu
L_EtOverflowPipeVert := H_Et - HW_EtOverflowChannel - H_PlantFreeboard - H_EtWeirFreefall - CouplingLength(ND_EtOverflowDrain) + 2*SocketDepth(ND_EtOverflowDrain) - ElbowRadius(ND_EtOverflowDrain) + T_PlantWall + Et_Origin[2]
L_EtOverflowPipeHoriz := ConRadius(ND_EtOverflowDrain) + S_Fitting + T_PlantWall - ElbowRadius(ND_EtOverflowDrain) - CouplingLength(ND_EtOverflowDrain) + SocketDepth(ND_EtOverflowDrain) = 8.24875 cm
EtOverflowFittingLayer := layer_new("EtOverflowFittingPlu", green)
EtOverflowCouplingVert := CouplingSUBF(Et_Origin + [
    max(S_Fitting + ConRadius(ND_EtOverflowDrain), ElbowRadius(ND_EtOverflowDrain) + SocketDepth(ND_EtOverflowDrain) + CouplingLength(ND_EtOverflowDrain) - T_PlantWall) - L_Et;
    W_Et + T_EtWeir + W_EtOverflowChannel - S_Fitting - ConRadius(ND_EtOverflowDrain);
    H_Et - HW_EtOverflowChannel - H_PlantFreeboard - H_EtWeirFreefall - SocketDepth(ND_EtOverflowDrain)
], [0; 270]*deg, ND_EtOverflowDrain, PS_Default, ["EtTankCon"])
EtOverflowCouplingHoriz := CouplingSUBF(Et_Origin + [
    max(S_Fitting + ConRadius(ND_EtOverflowDrain), ElbowRadius(ND_EtOverflowDrain) + SocketDepth(ND_EtOverflowDrain) + CouplingLength(ND_EtOverflowDrain) - T_PlantWall) - L_Et - ElbowRadius(ND_EtOverflowDrain) - 2*SocketDepth(ND_EtOverflowDrain);
    W_Et + T_EtWeir + W_EtOverflowChannel - S_Fitting - ConRadius(ND_EtOverflowDrain);
    H_Et - HW_EtOverflowChannel - H_PlantFreeboard - H_EtWeirFreefall - CouplingLength(ND_EtOverflowDrain) + SocketDepth(ND_EtOverflowDrain) - L_EtOverflowPipeVert - ElbowRadius(ND_EtOverflowDrain)
], [0; 0]*deg, ND_EtOverflowDrain, PS_Default, ["EtTankCon"])
EtOverflowElbow := ElbowF(Et_Origin + [
    max(S_Fitting + ConRadius(ND_EtOverflowDrain), ElbowRadius(ND_EtOverflowDrain) + SocketDepth(ND_EtOverflowDrain) + CouplingLength(ND_EtOverflowDrain) - T_PlantWall) - L_Et;
    W_Et + T_EtWeir + W_EtOverflowChannel - S_Fitting - ConRadius(ND_EtOverflowDrain);
    H_Et - HW_EtOverflowChannel - H_PlantFreeboard - H_EtWeirFreefall - CouplingLength(ND_EtOverflowDrain) + SocketDepth(ND_EtOverflowDrain) - L_EtOverflowPipeVert
], [0; 0; 270]*deg, ND_EtOverflowDrain, PS_Default)
FreezeEtOverflowFittings := FreezeLayer("EtOverflowFittingPlu")
EtOverflowPipeLayer := layer_new("EtOverflowPipePlu", blue)
EtOverflowPipeVert := PipeSUBF(Et_Origin + [
    max(S_Fitting + ConRadius(ND_EtOverflowDrain), ElbowRadius(ND_EtOverflowDrain) + SocketDepth(ND_EtOverflowDrain) + CouplingLength(ND_EtOverflowDrain) - T_PlantWall) - L_Et;
    W_Et + T_EtWeir + W_EtOverflowChannel - S_Fitting - ConRadius(ND_EtOverflowDrain);
    H_Et - HW_EtOverflowChannel - H_PlantFreeboard - H_EtWeirFreefall - CouplingLength(ND_EtOverflowDrain) + SocketDepth(ND_EtOverflowDrain)
], L_EtOverflowPipeVert, [0; 270; 0]*deg, ND_EtOverflowDrain, PS_Default, ["EtTankCon"])
EtOverflowPipeHoriz := PipeSUBF(Et_Origin + [
    (max(S_Fitting + ConRadius(ND_EtOverflowDrain), ElbowRadius(ND_EtOverflowDrain) + SocketDepth(ND_EtOverflowDrain) + CouplingLength(ND_EtOverflowDrain) - T_PlantWall) - L_Et) - ElbowRadius(ND_EtOverflowDrain);
    W_Et + T_EtWeir + W_EtOverflowChannel - S_Fitting - ConRadius(ND_EtOverflowDrain);
    H_Et - HW_EtOverflowChannel - H_PlantFreeboard - H_EtWeirFreefall - CouplingLength(ND_EtOverflowDrain) + SocketDepth(ND_EtOverflowDrain) - L_EtOverflowPipeVert - ElbowRadius(ND_EtOverflowDrain)
], L_EtOverflowPipeHoriz, [0; 0; 0]*deg, ND_EtOverflowDrain, PS_Default, ["EtTankCon"])
FreezeEtOverflowPipe := FreezeLayer("EtOverflowPipePlu")
EtOverflowPluScript := stack(EtOverflowFittingLayer, EtOverflowCouplingVert, EtOverflowCouplingHoriz, EtOverflowElbow, FreezeEtOverflowFittings, EtOverflowPipeLayer, EtOverflowPipeVert, EtOverflowPipeHoriz, FreezeEtOverflowPipe)
# Chemical Dose Controller
L_CdcLever := 0.45 m  # assumed from Drew's drawing for now
W_LeverArm := 0.0032 m
D_LATeetoLAOrigin := 0.0079 m
L_CdcFloat := 2*(CapHeight(ND_EtFloat) - CapThickness(ND_EtFloat)) + 1 in  # Length of the float pipe must fill both caps plus some.
D_CdcCht := 6 in
Z_FloatTop := ZW_Et - HL_Flowmeasure + 1/2*L_CdcFloat  # The elevation of the float with the center of the float being at the bottom row of orifices of the LFOM.
D_LeverOrigintoArm := 0.0336 m  # Distance from the lever arm origin (which is on the tee holding the lever arm up) to the lever arm
H_LeverHole := 0.0312 m - 0.0095/2*m
# Distance from the top of the entrance tank to the to the middle of the lever arm hole for the cable - (minus the) radius of the hole
D_Cable := 0.1 in
L_Cable := Z_EtTop + H_LeverHole - Z_FloatTop
D_LABracketOrigintoEndBracket := 0.0079 m
# This is the distance from the lever arm bracket origin (at the center of the hole of the bracket holding up the lever arm) to the end of the bracket
D_LeverHole := 0.0063 m  # Distance from the float end of the lever arm to the middle of the hole where the float cable will be attached.
D_LABOrigintoLAOriginX := 0.032 m
D_LABOrigintoLAOriginZ := 0.0249 m
T_CdcDt := 0.003 m  # Thickness of the drop tube
L_LAOriginToDtX := 0.0290 m  # Distance from the lever arm origin to the center of the drop tube in the x direction
L_LAOriginToDtX2 := 0.0396 m
L_LAOriginToDtY2 := 0.7919 m
L_LAOriginToDtY := 0.7812 m  # Distance from the lever arm origin to the outside center of the top part of the drop tube in the y direction
L_LAOriginToDtZ := 0.0429 m  # Distance from the lever arm origin to the drop tube in the z direction
L_LAOriginToDtCenterX := 0.0290 m  # Distance from the lever arm origin to the center of the drop tube in the x direction
T_CdcReducer := 0.0095 m  # Measured from CDC research team's apparatus
L_LAOriginToReducerX2 := 0.0893 m
L_LAOriginToReducerX := 0.0290 m  # Distance from the lever arm origin to the center of the reducer in the x direction
L_LAOriginToReducerY := 0.7315 m  # Distance from the lever arm origin to the outside center of the top part of the reducer in the y direction
L_LAOriginToReducerY2 := 0.7919 m
L_LAOriginToReducerZ := 0.1094 m  # Distance from the lever arm origin to the center of the large part of the reducer in the z direction
L_LAOriginToReducerCenterX := 0.0290 m  # Distance from the lever arm origin to the center of the reducer in the x direction
L_LAOriginToReducerCenterY := 0.7919 m  # Distance from the lever arm origin to the center of the reducer in the y direction
LA_Origin := [
    Et_Origin[0] - L_Et + 1/2*ND_EtFloat + 1/2*S_EtFloat + 1/2*W_LeverArm;
    Et_Origin[1] - T_PlantWall + D_LABracketOrigintoEndBracket + L_CdcFloatArm;
    Z_EtTop + D_LABOrigintoLAOriginZ
]
LADtFitting_Origin := [
    LA_Origin[0] - L_LAOriginToDtX;
    LA_Origin[1] - L_LAOriginToDtY - T_CdcDt;
    LA_Origin[2] + L_LAOriginToDtZ
]
LAReducerFitting_Origin := [
    LA_Origin[0] - L_LAOriginToReducerX;
    LA_Origin[1] - L_LAOriginToReducerY - T_CdcReducer;
    LA_Origin[2] + L_LAOriginToReducerZ
]
LADt_Center := [
    LA_Origin[0] - L_LAOriginToDtCenterX;
    LA_Origin[1] - L_LAOriginToReducerCenterY;
    LA_Origin[2] + L_LAOriginToDtZ
]
# Defines the center of the reducer. (The center in the z direction is the center of the larger part of the reducer).
LAReducer_Center := [
    LA_Origin[0] - L_LAOriginToReducerCenterX;
    LA_Origin[1] - L_LAOriginToReducerCenterY;
    LA_Origin[2] + L_LAOriginToReducerZ
]
CHT_Origin := [
    Et_Origin[0] - L_Et + 1/2*S_EtFloat - 0.5 m - D_CdcCht;
    Et_Origin[1] - T_PlantWall - 1/2*D_CdcCht;
    Z_CdcFloatvalveOrifice
]
# CDC Script
CdcLayer := layer_new("Cdc", ltpurple)
InsertLeverArm :=
    insertdwg("CdcLeverArm.dwg", LA_Origin, 1, 1, 0) if N_CoagCdcTubes ≤ 3
    insertdwg("CdcLeverArmwithReducer.dwg", LA_Origin, 1, 1, 0) otherwise
InsertLeverArmBracket := insertdwg("CdcLeverArmBracket.dwg", [
    Et_Origin[0] - L_Et + 1/2*ND_EtFloat + 1/2*S_EtFloat + 1/2*W_LeverArm + D_LABOrigintoLAOriginX;
    Et_Origin[1] - T_PlantWall + D_LABracketOrigintoEndBracket;
    Z_EtTop
], 1, 1, 0)
InsertCht := insertdwg("CdcCht.dwg", CHT_Origin, 1, 1, 0)
FloatCable := CylinderF([
    Et_Origin[0] - L_Et + 1/2*ND_EtFloat + 1/2*S_EtFloat;
    Et_Origin[1] - T_PlantWall + D_LATeetoLAOrigin + L_CdcFloatArm - D_LeverHole;
    Z_FloatTop
], D_Cable, L_Cable, [0; 90]*deg)
FreezeCdc := FreezeLayer("Cdc")
FloatCapsLayer := layer_new("CdcFloatCapPlu", green)
CdcFloatCapTop := CapF([
    Et_Origin[0] - L_Et + 1/2*ND_EtFloat + 1/2*S_EtFloat;
    Et_Origin[1] - T_PlantWall + D_LABracketOrigintoEndBracket + L_CdcFloatArm - D_LeverHole;
    Z_FloatTop - CapThickness(ND_EtFloat)
], [0; -90]*deg, ND_EtFloat)
CdcFloatCapBottom := CapF([
    Et_Origin[0] - L_Et + 1/2*ND_EtFloat + 1/2*S_EtFloat;
    Et_Origin[1] - T_PlantWall + D_LABracketOrigintoEndBracket + L_CdcFloatArm - D_LeverHole;
    Z_FloatTop - CapThickness(ND_EtFloat) - L_CdcFloat
], [0; 90]*deg, ND_EtFloat)
2.237 - 2.376 = -0.139
CapThickness(ND_EtFloat) =  # error: This variable is undefined.
FloatPipeLayer := layer_new("CdcFloatPipePlu", blue)
SocketDepth(ND_EtFloat) =  # error
L_CdcFloat =  # error
CdcFloatPipe := PipeF([
    Et_Origin[0] - L_Et + 1/2*ND_EtFloat + 1/2*S_EtFloat;
    Et_Origin[1] - T_PlantWall + D_LABracketOrigintoEndBracket + L_CdcFloatArm - D_LeverHole;
    Z_FloatTop - CapThickness(ND_EtFloat)
], L_CdcFloat, [0; -90]*deg, ND_EtFloat, PS_Default)
CdcScript := stack(CdcLayer, InsertLeverArm, InsertLeverArmBracket, InsertCht, FloatCable, FreezeCdc, FloatCapsLayer, CdcFloatCapTop, CdcFloatCapBottom, FreezeLayer("CdcFloatCapPlu"), FloatPipeLayer, CdcFloatPipe, FreezeLayer("CdcFloatPipePlu"))
OD_CdcFitting := 5/32*in  # Outer diameter of fitting- measured from CDC research team's fitting
ID_CdcFitting := 0.126 in  # Inner diameter of fitting- measured from CDC research team's fitting
L_CdcFitting := 0.75 in  # Length of fitting - measured from CDC research team's fitting
CdcFittingsLayer := layer_new("CdcFittings", dkgrey)
CdcFittingOuter :=
    CylinderF(LADtFitting_Origin, OD_CdcFitting/2, L_CdcFitting, [-90; 0]*deg) if N_CoagCdcTubes ≤ 3
    CylinderF(LAReducerFitting_Origin, OD_CdcFitting/2, L_CdcFitting, [-90; 0]*deg) otherwise
CdcFittingOuter_Array :=
    ArrayLastPolar(LADt_Center, N_CoagCdcTubes, 180 deg) if N_CoagCdcTubes ≤ 3
    ArrayLastPolar(LAReducer_Center, N_CoagCdcTubes, 180 deg) otherwise
FreezeCdcFittings := FreezeLayer("CdcFittings")
CdcFittingInner :=
    CylinderF(LADtFitting_Origin, ID_CdcFitting/2, L_CdcFitting, [-90; 0]*deg) if N_CoagCdcTubes ≤ 3
    CylinderF(LAReducerFitting_Origin, ID_CdcFitting/2, L_CdcFitting, [-90; 0]*deg) otherwise
CdcFittingInner_Array :=
    ArrayLastPolar(LADt_Center, N_CoagCdcTubes, 180 deg) if N_CoagCdcTubes ≤ 3
    ArrayLastPolar(LAReducer_Center, N_CoagCdcTubes, 180 deg) otherwise
GroupFitting := GroupAll("DeleteMe")
SubtractFittingInner := SubtractF(["CdcFittings"], "DeleteMe")
FreezeCdcFittings := FreezeLayer("CdcFittings")
FlexConnectLayer := layer_new("FlexConnect", red)
SweepPoint1 := LA_Origin + [-.0894; -.792; .1092]*m
SweepPoint2 := SweepPoint1 + [1; 0; 0]*in
SweepPoint5 := CHT_Origin + [.1432; 0; -.0629]*m
SweepPoint4 := SweepPoint5 + [1; 0; 0]*in
SweepPoint3 := [(SweepPoint1[0] + SweepPoint5[0])/2; (SweepPoint1[1] + SweepPoint5[1])/2; SweepPoint1[2] - 50 cm]
SweepPathPoints := [SweepPoint1; SweepPoint2; SweepPoint3; SweepPoint4; SweepPoint5]
FlexTube_Trial := FlexTube(SweepPathPoints, .125 in, .2 in, "FlexConnect", red)
# Insert in stack when flexcylinder fixed
FlexConnectLayer, FlexTube_Trial, FreezeLayer("FlexConnect")
CdcFittingsScript := stack(CdcFittingsLayer, CdcFittingOuter, CdcFittingOuter_Array, FreezeCdcFittings, CdcFittingInner, CdcFittingInner_Array, GroupFitting, SubtractFittingInner)
# CDC Calibration Column
SF_CalCol := 1.25
Ti_Res := 1.25*min
Q_CalColMax := SF_CalCol*Q_CdcMax
Vol_CalCol := Ti_Res*Q_CalColMax
# Effective column volume for 1.25 times the max flow rate through the chemical dose controller over 1.25 minutes
D_inCCMin := sqrt(4*Vol_CalCol/(π*(H_CoagTank - (Z_CoagulantOutlet - Z_CoagulantTankBottom) - H_PlantFreeboard))) = 0.808404 in
# Minimum inner diameter for a column no taller than the length between the Coagulant Stock Tank Freeboard and the Coagulant oulet for the effective column volume
ND_CdcCalCol := NominalDiameter(D_inCCMin, PS_Default)  # Next largest nominal diameter for minimum inner diameter
D_inCalCol := innerdiameter(ND_CdcCalCol, PS_Default)
H_CalCol := Vol_CalCol/(π*(D_inCalCol/2)^2)
# Calculate new height based on new inner diameter
H_CalCol =  # error
OriginCalCol := [
    -Et_Origin[0] - L_Et - T_PlantWall - (S_ChemTanks - T_ConcreteMin)/2;
    Et_Origin[1] - T_PlantWall - ConRadius(ND_CdcCalCol);
    Z_CoagulantOutlet
]
# Place the Calibration column halfway between the Coagulant Stock Tanks and the endge of the stock tank platform, just hanging off the platform and at the coagulant outlet height
Origin_TopCap := [OriginCalCol[0]; OriginCalCol[1]; OriginCalCol[2] + H_CalCol]
MakeCalColLayer := layer_new("CdcCalColumnPlu", ltpurple)
MainCalCol := PipeF(OriginCalCol, H_CalCol, [0; 90]*deg, ND_CalCol, PS_Default)
FreezeCalCol := FreezeLayer("CdcCalColumnPlu")
MakeCapsLayer := layer_new("CdcColumnCapsPlu", blue2)
TopCap := CapF(Origin_TopCap, [0; -90]*deg, ND_CdcCalCol)
BottomCap := CapF(OriginCalCol, [0; 90]*deg, ND_CdcCalCol)
FreezeCapsLayer := FreezeLayer("CdcColumnCapsPlu")
# To draw the hole in the top cap, we are subtracting a cylinder from the top cap layer
Origin_Cylinder := [OriginCalCol[0]; OriginCalCol[1]; OriginCalCol[2] + H_CalCol/2]
R_Cylinder := .5 cm
DrawCylinder := CylinderF(Origin_Cylinder, R_Cylinder, H_CalCol, [0; 90]*deg)
LayCylinder := GroupAll("DeleteMe")
MakeHole := SubtractF(["CdcColumnCapsPlu"], "DeleteMe")
LayStand := layer_new("CdcCalColumnStand", yellow)
BoardDim_Vert := [
    3.5*in;
    1.5*in;
    (1.1*H_CalCol) + OriginCalCol[2] - (CoagPlatform_Origin[2] + CoagPlatform_Dimensions[2])
]  # Start making the stand
Origin_VertBoard := [
    OriginCalCol[0] - BoardDim_Vert[0]/2;
    OriginCalCol[1] + ConRadius(ND_CalCol);
    CoagPlatform_Origin[2] + CoagPlatform_Dimensions[2]
]
FarCorner_VertBoard := BoardDim_Vert + Origin_VertBoard
BoardDim_Horiz := [3.5*in; BoardDim_Vert[2]/(2*tan(60*deg)); 1.5*in]
Origin_HorizBoard := Origin_VertBoard + [0; BoardDim_Vert[1]; 0]
FarCorner_HorizBoard := BoardDim_Horiz + Origin_HorizBoard
BoardDim_Slant := [3.5 in; 1.5 in; BoardDim_Vert[2]/(2*sin(60 deg))]
Origin_SlantBoard := FarCorner_HorizBoard
FarCorner_SlantBoard := Origin_SlantBoard + [-BoardDim_Slant[0]; -BoardDim_Slant[1]; BoardDim_Slant[2]]
MakeSlantBoard := BoxF(Origin_SlantBoard, FarCorner_SlantBoard, [0; 0; 30]*deg)
MakeVertBoard := BoxF(Origin_VertBoard, FarCorner_VertBoard, [0; 0; 0])
MakeHorizBoard := BoxF(Origin_HorizBoard, FarCorner_HorizBoard, [0; 0; 0])
FreezeBoards := FreezeLayer("CdcCalColumnStand")
CdcCalColumn_Script := stack(MakeCalColLayer, MainCalCol, FreezeCalCol, MakeCapsLayer, TopCap, BottomCap, FreezeCapsLayer, DrawCylinder, LayCylinder, MakeHole, LayStand, MakeSlantBoard, MakeVertBoard, MakeHorizBoard, Union_All, FreezeBoards)
# Flow Control Drain
EtFlowControlPipeLayer := layer_new("EtFlowControlPipePlu", blue)
EtFlowControlPipe := PipeSUBF(Et_Origin + [
    -L_EtHopperFirst/2 + S_Fitting + ConRadius(ND_EtDrain);
    S_Fitting + ConRadius(ND_EtDrain);
    outerradius(ND_EtFlowControl)
], L_EtFlowControlPipe, [0; 180; 0]*deg, ND_EtFlowControl, PS_Default, ["EtTankCon"])
EtFlowControlNipple1 := PipeF(Et_Origin + [
    T_PlantWall - SocketDepth(ND_EtFlowControl);
    S_Fitting + ConRadius(ND_EtDrain);
    outerradius(ND_EtFlowControl)
], 2*SocketDepth(ND_EtFlowControl), [0; 180; 0]*deg, ND_EtFlowControl, PS_Default)
EtFlowControlNipple2 := PipeF(Et_Origin + [
    T_PlantWall + 2*MaleAdapterLength(ND_EtFlowControl) + ValveLength(ND_EtFlowControl) - 2*ValveSocket(ND_EtFlowControl) - SocketDepth(ND_EtFlowControl);
    S_Fitting + ConRadius(ND_EtDrain);
    outerradius(ND_EtFlowControl)
], 2*SocketDepth(ND_EtFlowControl), [0; 180; 0]*deg, ND_EtFlowControl, PS_Default)
EtFlowControlNipple3 := PipeF(Et_Origin + [
    T_PlantWall + 2*MaleAdapterLength(ND_EtFlowControl) + ValveLength(ND_EtFlowControl) + SocketDepth(ND_EtFlowControl) - 2*ValveSocket(ND_EtFlowControl) + ElbowRadius(ND_EtFlowControl);
    S_Fitting + ConRadius(ND_EtDrain);
    outerradius(ND_EtFlowControl) - ElbowRadius(ND_EtFlowControl) - 2*SocketDepth(ND_EtFlowControl)
], 2*SocketDepth(ND_EtFlowControl), [0; 90; 0]*deg, ND_EtFlowControl, PS_Default)
EtFlowControlFittingLayer := layer_new("EtFlowControlFittingPlu", green)
EtFlowControlCoupling := CouplingSUBF(Et_Origin + [
    T_PlantWall - SocketDepth(ND_EtFlowControl);
    S_Fitting + ConRadius(ND_EtDrain);
    outerradius(ND_EtFlowControl)
], [0; 0]*deg, ND_EtFlowControl, PS_Default, ["EtTankCon"])
EtFlowControlElbow1 := ElbowF(Et_Origin + [
    T_PlantWall + 2*MaleAdapterLength(ND_EtFlowControl) + ValveLength(ND_EtFlowControl) + SocketDepth(ND_EtFlowControl) - 2*ValveSocket(ND_EtFlowControl);
    S_Fitting + ConRadius(ND_EtDrain);
    outerradius(ND_EtFlowControl)
], [270; 0; 270]*deg, ND_EtFlowControl, PS_Default)
EtFlowControlElbow2 := ElbowF(Et_Origin + [
    T_PlantWall + 2*MaleAdapterLength(ND_EtFlowControl) + ValveLength(ND_EtFlowControl) + SocketDepth(ND_EtFlowControl) - 2*ValveSocket(ND_EtFlowControl) + ElbowRadius(ND_EtFlowControl);
    S_Fitting + ConRadius(ND_EtDrain);
    outerradius(ND_EtFlowControl) - ElbowRadius(ND_EtFlowControl) - 2*SocketDepth(ND_EtFlowControl)
], [0; 0; 270]*deg, ND_EtFlowControl, PS_Default)
EtFlowControlAdapterLayer := layer_new("EtFlowControlAdapterPlu", red)
EtFlowControlAdapter1 := MaleAdapterF(Et_Origin + [
    T_PlantWall + SocketDepth(ND_EtFlowControl);
    S_Fitting + ConRadius(ND_EtDrain);
    outerradius(ND_EtFlowControl)
], [180; 0]*deg, ND_EtFlowControl, PS_Default)
EtFlowControlAdapter2 := MaleAdapterF(Et_Origin + [
    T_PlantWall + 2*MaleAdapterLength(ND_EtFlowControl) - 2*ValveSocket(ND_EtFlowControl) - SocketDepth(ND_EtFlowControl) + ValveLength(ND_EtFlowControl);
    S_Fitting + ConRadius(ND_EtDrain);
    outerradius(ND_EtFlowControl)
], [0; 0]*deg, ND_EtFlowControl, PS_Default)
EtFlowControlValveLayer := layer_new("EtFlowControlValvePlu", blue3)
EtFlowControlValve := insertdwg("VAL-Scaled-Gate-Valve-Threaded", Et_Origin + [
    T_PlantWall + MaleAdapterLength(ND_EtFlowControl) - ValveSocket(ND_EtFlowControl) + ValveLength(ND_EtFlowControl);
    S_Fitting + ConRadius(ND_EtDrain);
    outerradius(ND_EtFlowControl)
], 2*outerradius(ND_EtFlowControl)/(1.16 m), 2*outerradius(ND_EtFlowControl)/(1.16 m), 0 deg)
EtFlowControlSubWedge := WedgeF(Et_Origin + [
    -L_EtHopperFirst/2 + S_Fitting + ConRadius(ND_EtDrain);
    S_Fitting + ConRadius(ND_EtDrain) + outerradius(ND_EtFlowControl);
    outerdiameter(ND_EtFlowControl)
], Et_Origin + [
    -L_EtHopperFirst/2 + S_Fitting + ConRadius(ND_EtDrain) + outerdiameter(ND_EtFlowControl)/tan(AN_EtSlope);
    S_Fitting + ConRadius(ND_EtDrain) - outerradius(ND_EtFlowControl);
    0 m
], [0; 0; 0]*m)
SubtractPipeEndWedge := SubtractF(["EtFlowControlPipePlu"], "DeleteMe")
FlowControlScript := stack(EtFlowControlPipeLayer, EtFlowControlPipe, EtFlowControlNipple1, EtFlowControlNipple2, EtFlowControlNipple3, FreezeLayer("EtFlowControlPipePlu"), EtFlowControlFittingLayer, EtFlowControlCoupling, EtFlowControlElbow1, EtFlowControlElbow2, FreezeLayer("EtFlowControlFittingPlu"), EtFlowControlAdapterLayer, EtFlowControlAdapter1, EtFlowControlAdapter2, FreezeLayer("EtFlowControlAdapterPlu"), EtFlowControlValveLayer, EtFlowControlValve, FreezeLayer("EtFlowControlValvePlu"), EtFlowControlSubWedge, GroupAll("DeleteMe"), SubtractPipeEndWedge)
AC_EntranceTank := stack(CdcScript, CdcFittingsScript, CdcCalColumn_Script, EtTankScript, EtTrashRackScript, EtOverflowPluScript, EtDrainsRight, EtLfomScript, RMScript, FlowControlScript)
