Q_Plant := 170*L/s
# [reference: ExpertInputs.xmcd]
# [reference: MathFunctions.xmcd]
# [reference: PipeDatabase.xmcd]
# [reference: MaterialsDatabase.xmcd]
# [reference: FluidsFunctions.xmcd]
# [reference: SedTankFunctions.xmcd]
# [reference: CdcFunctions.xmcd]
# [reference: SedimentationTank85Lps.xmcd]
# [reference: Flocculator.xmcd]
# [reference: LFOMvlk24.xmcd]
# [reference: EntranceTankvlk24.xmcd]
# [reference: StackedRapidSandFilter.xmcd]
# [reference: LinearCdc.xmcd]
# [reference: ChemStorageTanks.xmcd]
# AutoCAD drawing programs:
# Translators:
# These are the codes that take MathCAD outputs and create AutoCAD scripts that are used to draw the plant (formerly Basics)
# [reference: MtoATranslators.xmcd]
# The wrapped MtoA translator contains the functions that the user will want to access. These functions will draw pieces with full functionality - specifying the location, dimension, and orientation of the object. Also, it contains layer control and subtraction capabilities for grouped objects.
# [reference: MtoATranslatorsWrapped.xmcd]
# Drawing functions:
# [reference: ChannelF.xmcd]
# [reference: PlumbingF.xmcd]
# [reference: TankF.xmcd]
# [reference: StairsF.xmcd]
# [reference: DrainChannelF.xmcd]
# AutoCAD Script Files:
# [reference: FlocculatorAC85Lps.xmcd]
# [reference: SedimentationTankAC85Lps.xmcd]
# [reference: EntranceTankAC85Lps.xmcd]
# [reference: ChemStockTanksAC85Lps.xmcd]
# [reference: StackedRapidSandFilterAC85Lps.xmcd]
# [reference: CdcAC85Lps.xmcd]
# [reference: OperatorAccessAC.xmcd]
L_Sed = 6.61055 m
L_Et = 5.3923 m
# Entrance Tank AutoCAD
# Entrance Tank Concrete
# Origins and dimensions
Et_Origin0 := [
    Plant_Origin[0] - L_Sed + L_Et;
    Floc_Origin[1] + {
        (N_FlocChannels*(W_FlocChannel + T_FlocChannelWall)) + W_EtWalkway + 2*T_PlantWall - T_FlocChannelWall if Q_Plant > Q_PlantMaxLF
        L_Floc + T_PlantWall + L_ChannelSlot + W_EtWalkway otherwise
    };
    Z_Et
] = [-1.21825; 24.9123; 1.81251] m
Et_Origin1 := [
    Plant_Origin[0] - L_Sed + L_Et;
    Floc_Origin[1] + (N_FlocChannels*(W_FlocChannel + T_PlantWall)) + W_EtWalkway + T_PlantWall;
    Z_Et
] = [-1.21825; 25.4123; 1.81251] m
Et_Origin :=
    Et_Origin0 if EN_EtGrit == 0
    Et_Origin1 otherwise
Et_Dim :=
    [L_Et + W_TrainWalkway + 3*T_PlantWall + L_LfomChannel - T_ChannelWall + T_ConcreteMin; W_Et; H_Et] if EN_DoubleTrain == 1
    [L_Et; W_Et; H_Et] otherwise
    = [8.4335; 4.56998; 1.04078] m
EtHopper_Origin := [
    Et_Origin[0] - S_Fitting - ConRadius(ND_EtDrain) - L_EtHopper/2 - T_EtHopperLedge;
    Et_Origin[1] + W_Et;
    Et_Origin[2]
] = [-2.11063; 29.4823; 1.81251] m
Hopper_FarCorner :=
    [Et_Origin[0] - L_EtHopper - T_EtHopperLedge; Et_Origin[1]; Z_EtHopper] if EN_DoubleTrain == 0
    [Et_Origin[0] - L_EtHopper - T_EtHopperLedge; Et_Origin[1]; Z_EtHopper] otherwise
    = [-2.65142; 24.9123; 2.35329] m
HopperBack_FarCorner :=
    [Et_Origin[0] - L_EtHopperBack; (Et_Origin[1] + L_Et + W_Et); Et_Origin[2] + H_EtHopperBack] if EN_DoubleTrain == 0
    otherwise
        [
            Et_Origin[0] - L_EtHopperBack/2;
            (Et_Origin[1] + L_Et + W_Et) + (W_TrainWalkway + 2*T_ChannelWall + 2*L_LfomChannel);
            Et_Origin[2] + H_EtHopperBack
        ]
    = [-3.40244; 38.457; 2.35329] m
HopperFront_FarCorner :=
    [Et_Origin[0] + L_EtHopperFront; Et_Origin[1] + L_Et; Et_Origin[2] + H_EtHopperFront] if EN_DoubleTrain == 0
    otherwise
        [
            Et_Origin[0] + L_EtHopperFront/2;
            Et_Origin[1] + L_Et + (W_TrainWalkway + 2*T_ChannelWall + 2*L_LfomChannel);
            Et_Origin[2] + H_EtHopperFront
        ]
    = [0.965938; 33.887; 2.35329] m
EtDC_Origin :=
    (Et_Origin + [-L_EtDC - (W_EtWalkway + 2*T_PlantWall + L_LfomChannel); .5*L_EtHopperFront; -T_PlantWall]) if EN_DoubleTrain == 1
    (Et_Origin + [-L_EtDC; .5*L_EtHopperFront; -T_PlantWall]) otherwise
LfomChannel_Origin := [Et_Origin[0] - L_Et + L_LfomChannel; Et_Origin[1]; Floc_Origin[2]] = [-5.71935; 24.9123; 0] m
# tank walls
EntTankLayer := layer_new("EtCon", grey)
EntTank := Tank(Et_Origin, Et_Dim, T_PlantWall)
# Hoppers
EtHopper := WedgeF(EtHopper_Origin, Hopper_FarCorner, [0; 0; 0]*deg)
MirrorEtHopper := MirrorLast([EtHopper_Origin[0] + T_EtHopperLedge/2; EtHopper_Origin[1]], [EtHopper_Origin[0] + T_EtHopperLedge/2; EtHopper_Origin[1] + zc], "n")
EtHopperLedge := BoxF(EtHopper_Origin, EtHopper_Origin + [T_EtHopperLedge; -W_Et; H_EtHopper], [0; 0; 0]*deg)
AddHopper :=
    1 if EN_DoubleTrain == 0
    4 otherwise
ArrayEtHoppers := array_all(1, N_EtFullHopper + AddHopper, -L_EtHopper - T_EtHopperLedge)
EtHopperBack := WedgeF(Et_Origin + [0 m; W_Et; 0 m], HopperBack_FarCorner, [90; 0; 0]*deg)
EtHopperFront := WedgeF(Et_Origin, HopperFront_FarCorner, [90; 0; 0]*deg)
# Drain channel
EtDC :=
    DrainChannelF(EtDC_Origin + [0 m; W_EtDC; 0 m], [180; 0; 0]*deg, Q_EtDCMax, W_EtDC, H_EtDC, L_EtDC + W_EtWalkway + 2*T_PlantWall + L_LfomChannel, 1 %, Nu_Water, E_Concrete, 1) if EN_DoubleTrain == 1
    DrainChannelF(EtDC_Origin + [0 m; W_EtDC; 0 m], [180; 0; 0]*deg, Q_EtDCMax, W_EtDC, H_EtDC, L_EtDC, 1 %, Nu_Water, E_Concrete, 1) otherwise
FreezeEntTank := FreezeLayer("EtCon")
# Subtract extra Hopper length
HopperSubtraction := BoxF([Et_Origin[0] - Et_Dim[0] - T_PlantWall; Et_Origin[1]; Et_Origin[2]], [Et_Origin[0] - Et_Dim[0] - T_PlantWall - L_EtHopper; Et_Origin[1] + W_Et; Et_Origin[2] + H_Et], [0; 0; 0]*deg)
HopperSkim := BoxF([
    Et_Origin[0] - Et_Dim[0];
    Et_Origin[1];
    Et_Origin[2] + H_Et - (HL_Lfom + H_PlantFreeboard + T_ConcreteMin)
], [Et_Origin[0]; Et_Origin[1] + W_Et; Et_Origin[2] + H_Et], [0; 0; 0]*deg)
# Trash rack slots
TrashRackSlot1 := BoxF(EtHopper_Origin + [T_EtHopperLedge/2 - T_ConcreteMin/2; 2*D_Rebar; H_EtHopper - 2*D_Rebar], EtHopper_Origin + [
    T_EtHopperLedge/2 - T_ConcreteMin/2 - 2*D_Rebar;
    -W_Et - 2*D_Rebar;
    H_EtHopper + H_EtTop + H_PlantFreeboard + zc
], [0; 0; 0]*deg)
TrashRackSlot2 := BoxF(EtHopper_Origin + [T_EtHopperLedge/2 + T_ConcreteMin/2; 2*D_Rebar; H_EtHopper - 2*D_Rebar], EtHopper_Origin + [
    T_EtHopperLedge/2 + T_ConcreteMin/2 + 2*D_Rebar;
    -W_Et - 2*D_Rebar;
    H_EtHopper + H_EtTop + H_PlantFreeboard + zc
], [0; 0; 0]*deg)
SubtractTrashRackSlots := SubtractF(["EtCon"], "DeleteMe")
# No-Grit Features
EtDrainSlope := WedgeF(Et_Origin - [L_Et; 0; 0], Et_Origin + [
    -L_Et + ConRadius(ND_EtFlowControl)/tan(30 deg);
    2*ConRadius(ND_EtFlowControl);
    -ConRadius(ND_EtFlowControl)
], [0; 0; 0]*deg)
FreezeEntTank := FreezeLayer("EtCon")
SubtractEtDrainSlope := SubtractF(["EtCon"], "DeleteMe")
EtBaffleLayer := layer_new("EtBaffle", ltgrey)
EtBaffle := BoxSUBF(Et_Origin + [-S_EtBaffle; -T_ConcreteMin; S_EtBaffleBottom], Et_Origin + [-S_EtBaffle - T_ConcreteMin; W_Et + T_ConcreteMin; H_Et], [0; 0; 0]*deg, ["EtCon"])
EtBaffleFrz := FreezeLayer("EtBaffle")
EtTankScript :=
    stack(EntTankLayer, EntTank, FreezeEntTank, EtDrainSlope, GroupDelete, SubtractEtDrainSlope, EtBaffleLayer, EtBaffle, EtBaffleFrz) if EN_EtGrit == 1
    stack(EntTankLayer, EtHopper, MirrorEtHopper, EtHopperLedge, ArrayEtHoppers, EntTank, EtHopperFront, EtHopperBack, EtDC, Union_All, FreezeEntTank, HopperSkim, TrashRackSlot1, TrashRackSlot2, HopperSubtraction, GroupDelete, SubtractTrashRackSlots) if EN_DoubleTrain == 1 and EN_EtGrit == 0
    stack(EntTankLayer, EtHopper, MirrorEtHopper, EtHopperLedge, ArrayEtHoppers, EntTank, EtHopperFront, EtHopperBack, EtDC, Union_All, FreezeEntTank, TrashRackSlot1, TrashRackSlot2, HopperSubtraction, GroupDelete, SubtractTrashRackSlots) otherwise
# Concrete Modifications for Double Train
ModificationsLayer := layer_new("Extensions", grey)
ExtensionTank_Origin := [Et_Origin[0] - L_Et - T_PlantWall; Et_Origin[1]; Et_Origin[2]]
Extra_Dim := [W_TrainWalkway + 3*T_PlantWall + L_LfomChannel + T_ChannelWall; W_Et; H_Et]
LfomChannel2_Origin := [
    LfomChannel_Origin[0] - L_LfomChannel - 3*T_ChannelWall - W_TrainWalkway - T_ConcreteMin;
    ExtensionTank_Origin[1];
    Floc_Origin[2]
] = [-8.61055; 24.9123; 0] m
LfomChannel2_Dim := [L_LfomChannel; W_LfomChannel; H_LfomChannel + Z_LfomChannelBottom]
LfomChannel2 := Tank(LfomChannel2_Origin, LfomChannel2_Dim, T_ChannelWall)
RMChannel2_Origin := LfomChannel2_Origin + [-T_ChannelWall - W_RMChannel; T_ChannelWall; -T_ChannelWall] = [-9.21055; 25.0623; -0.15] m
RMChannel2 := BoxF(RMChannel2_Origin, RMChannel2_Origin + [
    -W_RMChannel - 2*T_ChannelWall;
    L_RMChannel + 2*T_ChannelWall + T_PlantWall;
    H_RMChannel + 2*T_ChannelWall
], [180; 0; 0]*deg)
EndFill := BoxF([
    Et_Origin[0] - Et_Dim[0] + (Et_Dim[0] - L_EtHopper*(N_EtFullHopper + AddHopper) - L_EtHopper/2 - 2*T_ConcreteMin);
    Et_Origin[1] + W_LfomChannel + T_ChannelWall;
    Et_Origin[2]
], [Et_Origin[0] - Et_Dim[0]; Et_Origin[1] + W_Et; Et_Origin[2] + H_EtHopper], [0; 0; 0]*deg)
EndFill2 := BoxF([
    Et_Origin[0] - Et_Dim[0] + (Et_Dim[0] - L_EtHopper*(N_EtFullHopper + AddHopper) - L_EtHopper/2);
    Et_Origin[1] + W_LfomChannel + T_ChannelWall;
    Et_Origin[2]
], [Et_Origin[0] - Et_Dim[0]; Et_Origin[1] + W_Et/2 - T_ConcreteMin; Et_Origin[2] + H_EtHopper], [0; 0; 0]*deg)
MirrorEndFill2 := Mirror3dLast("xz", [Et_Origin[0] - Et_Dim[0]; Et_Origin[1] + W_Et/2 - T_ConcreteMin], "n")
FreezeModifications := FreezeLayer("Extensions")
LfomChannelSubtraction := BoxF([LfomChannel2_Origin[0] - L_LfomChannel; LfomChannel2_Origin[1]; LfomChannel2_Origin[2]], [LfomChannel2_Origin[0]; LfomChannel2_Origin[1]; LfomChannel2_Origin[2]] + [0 m; W_LfomChannel; (LfomChannel2_Dim[2] - H_Et) + T_PlantWall], [0; 0; 0]*deg)
LfomSheetSubtraction2 := BoxF([
    LfomChannel2_Origin[0] - T_ConcreteMin;
    LfomChannel2_Origin[1] + W_LfomChannel;
    LfomChannel2_Origin[2] + H_LfomChannel - (HL_Lfom + H_PlantFreeboard + T_ConcreteMin)
], [
    LfomChannel2_Origin[0] - L_LfomChannel + T_ConcreteMin;
    LfomChannel2_Origin[1] + W_LfomChannel + T_ChannelWall;
    LfomChannel2_Origin[2] + H_LfomChannel
], [0; 0; 0]*deg)
MidWallSubtraction := BoxF([
    ExtensionTank_Origin[0];
    ExtensionTank_Origin[1] + T_ChannelWall + W_LfomChannel;
    Et_Origin[2] + H_EtHopper
], [ExtensionTank_Origin[0] + T_PlantWall; ExtensionTank_Origin[1] + W_Et; Et_Origin[2] + H_Et], [0; 0; 0]*deg)
MidWallSubtraction2 := BoxF([ExtensionTank_Origin[0]; ExtensionTank_Origin[1]; ExtensionTank_Origin[2]], [
    ExtensionTank_Origin[0] + (T_PlantWall - T_ChannelWall);
    ExtensionTank_Origin[1] + L_LfomChannel;
    ExtensionTank_Origin[2] + H_Et
], [0; 0; 0]*deg)
RMSubtraction2 := BoxF(RMChannel2_Origin + [T_ChannelWall; 0 m; T_ChannelWall], RMChannel2_Origin + [
    -W_RMChannel + T_ChannelWall;
    L_RMChannel + 2*T_ChannelWall + T_PlantWall;
    H_RMChannel + T_ChannelWall
], [180; 0; 0]*deg)
# GroupDelete
ModificationSubtractions := SubtractF(["Etcon"; "Extensions"], "DeleteMe")
ModificationScript := stack(ModificationsLayer, LfomChannel2, RMChannel2, FreezeModifications, LfomChannelSubtraction, LfomSheetSubtraction2, RMSubtraction2, GroupDelete, ModificationSubtractions)
# [component: inputs ModificationScript]
# Trash Rack
TRLayer := layer_new("EtTrashrack", yellow)
HorizCylinder := CylinderF(EtHopper_Origin + [T_EtHopperLedge/2 - T_ConcreteMin/2 - D_Rebar/2; 2*D_Rebar; H_EtHopper - 3/2*D_Rebar], D_Rebar/2, W_Et + 4*D_Rebar, [90; 0]*deg)
ViewRight := view("r")
ArrayHorizCylinder := ArrayLast(N_TRSpacesH + 1, 1, B_EtRebar)
ViewTop := view("t")
VertCylinder :=
    CylinderF(EtHopper_Origin + [T_EtHopperLedge/2 - T_ConcreteMin/2 - 3*D_Rebar/2; 3/2*D_Rebar; H_EtHopper - 2*D_Rebar], D_Rebar/2, (N_TRSpacesH + 1)*B_EtRebar - D_Rebar, [0; 90]*deg) if EN_DoubleTrain == 0
    otherwise
        CylinderF(EtHopper_Origin + [
            T_EtHopperLedge/2 - T_ConcreteMin/2 - 3*D_Rebar/2;
            3/2*D_Rebar;
            H_EtHopper - 2*D_Rebar - (H_EtHopper - (H_Et - (HL_Lfom + H_PlantFreeboard + T_ConcreteMin)))
        ], D_Rebar/2, HL_Lfom + H_PlantFreeboard + T_ConcreteMin - zc, [0; 90]*deg)
ArrayVertCyl := ArrayLast(1, N_TRSpacesV + 1, -B_EtRebar)
ArrayAll := array_all(1, 2, T_ConcreteMin + 2*D_Rebar)
Freeze := FreezeLayer("EtTrashrack")
EtTrashRackScript := stack(TRLayer, HorizCylinder, ViewRight, ArrayHorizCylinder, ViewTop, VertCylinder, ViewRight, ArrayVertCyl, ViewTop, ArrayAll, Freeze)
# Rapid Mix Pipe, LFOM, and Orifice Plate
# this is the upper elbow (connected to the LFOM)
RMElbow_Origin0 := [
    Plant_Origin[0] - L_Sed + S_Fitting + ConRadius(ND_RMPipe);
    Et_Origin[1] + W_Et - S_Fitting - ConRadius(ND_RMPipe) - ElbowRadius(ND_RMPipe);
    FlocCoupling_Origin[2]
]
RMElbow_Origin1 := [
    Plant_Origin[0] - L_Sed + S_Fitting + ConRadius(ND_RMPipe);
    Et_Origin[1] + W_Et - 2*S_Fitting - ConRadius(ND_RMPipe) - ElbowRadius(ND_RMPipe) - 2*ConRadius(ND_EtOverflowDrain);
    FlocCoupling_Origin[2]
]
RMElbow_Origin :=
    RMElbow_Origin0 if EN_EtGrit == 0
    RMElbow_Origin1 otherwise
    = [-6.29147; 28.4012; 0.304] m
RMAirRelease_Origin := [
    RMElbow_Origin[0];
    Floc_Origin[1] + (N_FlocChannels*(W_FlocChannel + T_FlocChannelWall)) + T_PlantWall - T_FlocChannelWall + S_Fitting;
    FlocCoupling_Origin[2] + innerdiameter(ND_RMPipe, PS_Default)/2 - zc
]
L_RMPipeHoriz := (Et_Origin[1] + W_Et - S_Fitting - ConRadius(ND_RMPipe) - ElbowRadius(ND_RMPipe)) - (Floc_Origin[1] + N_FlocChannels*W_FlocChannel + (N_FlocChannels - 1)*T_FlocChannelWall - L_FlocCouplingExt + CouplingLength(ND_RMPipe) - SocketDepth(ND_RMPipe)) = 4.7435 m
L_RMPipeVert := Z_EtTop - (RMElbow_Origin[2] + ElbowRadius(ND_RMPipe)) = 1.78729 m
L_RMAirRelease := Floc_Origin[2] + H_Floc - (FlocCoupling_Origin[2] + innerdiameter(ND_RMPipe, PS_Default)/2 - zc)
# RM Elbow
RMElbowLayer := layer_new("EtRmElbowPlu", green)
RMElbow := ElbowSUBF(RMElbow_Origin, [0; 90; 0]*deg, ND_RMPipe, PS_Default, ["EtCon"])
FreezeRMElbow := FreezeLayer("EtRmElbowPlu")
# RM Pipes
RMPipeLayer := layer_new("EtRmPipePlu", blue)
RMVertPipe := PipeSUBF([
    RMElbow_Origin[0];
    RMElbow_Origin[1] + ElbowRadius(ND_RMPipe);
    RMElbow_Origin[2] + ElbowRadius(ND_RMPipe)
], L_RMPipeVert, [0; 90; 0]*deg, ND_RMPipe, PS_Default, ["EtCon"])
RMHorizPipe := PipeF(RMElbow_Origin, L_RMPipeHoriz, [90; 0; 0]*deg, ND_RMPipe, PS_Default)
RMAirRelease := PipeF(RMAirRelease_Origin, L_RMAirRelease, [0; 90; 0]*deg, ND_RMAirRelease, PS_Default)
RMAirReleaseHole := CylinderF([RMAirRelease_Origin[0]; RMAirRelease_Origin[1]; FlocCoupling_Origin[2]], outerradius(ND_RMAirRelease), outerradius(ND_RMPipe) + zc, [0; 90; 0]*deg)
FreezeRMPipe := FreezeLayer("EtRmPipePlu")
SelectRMPipes := SelectLayer("EtRmPipePlu")
# LFOM Orifices
LFOM_Origin0 := [RMElbow_Origin[0]; RMElbow_Origin[1] + ElbowRadius(ND_RMPipe); ZW_Et - HL_Flowmeasure]
LFOM_Origin1 := [RMElbow_Origin[0]; RMElbow_Origin[1] + ElbowRadius(ND_RMPipe); ZW_Et - HL_Flowmeasure]
LFOM_Origin :=
    LFOM_Origin0 if EN_EtGrit == 0
    LFOM_Origin1 otherwise
LfomOrifices :=
    Local ← FreezeRMPipe
    for h ∈ 0 .. last(H_LfomOrifices)
        if N_LfomOrifices[h] ≠ 0
            Local ← stack(Local, CylinderF([LFOM_Origin[0]; LFOM_Origin[1]; LFOM_Origin[2] + H_LfomOrifices[h]], D_LfomOrifices/2, outerradius(ND_RMPipe) + zc, [
                90 deg + (asin(0.5*S_LfomOrificesMin/(2*outerradius(ND_RMPipe))) + asin(D_LfomOrifices/(2*outerradius(ND_RMPipe))))*(mod(h, 2) == 0);
                0 deg
            ]))
        Local ← stack(Local, ArrayLastPolar([LFOM_Origin[0]; LFOM_Origin[1]; LFOM_Origin[2] + H_LfomOrifices[h]], N_LfomOrifices[h], (N_LfomOrifices[h] - 1)*(2*asin(D_LfomOrifices/(2*outerradius(ND_RMPipe))) + 2*asin(S_LfomOrificesMin/(2*outerradius(ND_RMPipe)))))) if N_LfomOrifices[h] > 1
    return Local
SubtractRMPipeOrifices := SubtractF(["EtRmPipePlu"], "DeleteMe")
RMScript := stack(RMElbowLayer, RMElbow, FreezeRMElbow, RMPipeLayer, RMVertPipe, RMHorizPipe, FreezeRMPipe, RMAirReleaseHole, GroupDelete, SubtractRMPipeOrifices, SelectRMPipes, RMAirRelease, LfomOrifices, GroupDelete, SubtractRMPipeOrifices)
# High Flow LFOM Sheet and Channel
EtConLayer := SelectLayer("EtCon")
T_LfomChannelWall := T_ChannelWall
T_LfomSheet := T_ConcreteMin
LfomChannel_Dim := [L_LfomChannel; W_LfomChannel; H_LfomChannel + Z_LfomChannelBottom] = [0.8912; 0.45; 2.85328] m
RMChannel_Origin := [Et_Origin[0] - L_Et + W_RMChannel; Et_Origin[1] - T_PlantWall - L_RMChannel; Floc_Origin[2]]
RMChannel_Dim := [W_RMChannel; L_RMChannel; H_RMChannel] = [0.45; 0.861; 0.45] m
LfomSheet_Dim := [-L_LfomChannel; T_LfomSheet; HL_Lfom + H_PlantFreeboard + T_ConcreteMin]
LfomSheet_Origin := [
    LfomChannel_Origin[0];
    LfomChannel_Origin[1] + W_LfomChannel + 0.5*(T_ChannelWall - T_LfomSheet);
    Z_EtTop - LfomSheet_Dim[2]
] = [-5.71935; 25.4123; 2.30329] m
LfomChannel := Tank(LfomChannel_Origin, LfomChannel_Dim, T_ChannelWall)
LfomChannelFill := BoxF(LfomChannel_Origin + [T_ChannelWall; 0 m; 0 m], LfomChannel_Origin + [-L_LfomChannel; W_LfomChannel + T_ChannelWall; -H_Et + H_LfomChannel], [0; 0; 0]*deg)
RMChannel := Tank(RMChannel_Origin, RMChannel_Dim, T_ChannelWall)
RMChannelTop := BoxF(RMChannel_Origin + [T_LfomChannelWall; -T_LfomChannelWall; H_RMChannel], RMChannel_Origin + [-W_RMChannel - T_LfomChannelWall; L_RMChannel + T_LfomChannelWall; H_RMChannel + T_LfomChannelWall], [0; 0; 0]*deg)
FreezeEtcon := FreezeLayer("EtCon")
RMChannelSubtraction := BoxF(RMChannel_Origin, RMChannel_Origin + [-W_RMChannel; -T_LfomChannelWall; H_RMChannel], [0; 0; 0]*deg)
ChannelSubtraction := BoxF(LfomChannel_Origin + [-L_LfomChannel; 0 m; 0 m], LfomChannel_Origin + [-L_LfomChannel + W_RMChannel; -T_PlantWall; H_RMChannel], [0; 0; 0]*deg)
SlopeSubtraction := BoxF(LfomChannel_Origin, LfomChannel_Origin + [-L_LfomChannel; W_LfomChannel; LfomChannel_Dim[2]], [0; 0; 0]*deg)
SlopeSubtraction2 := BoxF(LfomChannel2_Origin, LfomChannel2_Origin + [-L_LfomChannel; W_LfomChannel; LfomChannel2_Dim[2]], [0; 0; 0]*deg)
LfomSheetSubtraction := BoxF([LfomChannel_Origin[0] - T_ConcreteMin; LfomChannel_Origin[1] + W_LfomChannel; LfomSheet_Origin[2]], [
    LfomChannel_Origin[0] - L_LfomChannel + T_ConcreteMin;
    LfomChannel_Origin[1] + W_LfomChannel + T_ChannelWall;
    LfomChannel_Origin[2] + LfomChannel_Dim[2]
], [0; 0; 0]*deg)
BoxF([
    LfomChannel_Origin[0] + T_ConcreteMin;
    LfomChannel_Origin[1] + W_LfomChannel;
    LfomSheet_Origin[2] + T_ConcreteMin
], [
    LfomChannel_Origin[0] - L_LfomChannel + T_ConcreteMin;
    LfomChannel_Origin[1] + W_LfomChannel + T_ChannelWall;
    LfomChannel_Origin[2] + H_LfomChannel
], [0; 0; 0]*deg)
LfomSheetSlotSubtraction := BoxF([
    LfomChannel_Origin[0];
    LfomChannel_Origin[1] + W_LfomChannel + 0.5*(T_ChannelWall - T_LfomSheet);
    LfomSheet_Origin[2]
], LfomChannel_Origin + [-L_LfomChannel; W_LfomChannel + 0.5*(T_ChannelWall + T_LfomSheet); LfomChannel_Dim[2]], [0; 0; 0]*deg)
BoxF([
    LfomChannel_Origin[0];
    LfomChannel_Origin[1] + W_LfomChannel + 0.5*(T_ChannelWall - T_LfomSheet);
    LfomSheet_Origin[2]
], LfomChannel_Origin + [-L_LfomChannel; W_LfomChannel + 0.5*(T_ChannelWall + T_LfomSheet); H_LfomChannel], [0; 0; 0]*deg)
LfomChannelOrificeSheetSubtraction := BoxF([
    LfomChannel_Origin[0] + T_LfomSheet;
    LfomChannel_Origin[1];
    LfomChannel_Origin[2] + Z_LfomChannelOrifice
], [
    LfomChannel_Origin[0] - T_LfomSheet - L_LfomChannel;
    LfomChannel_Origin[1] + W_LfomChannel;
    LfomChannel_Origin[2] + T_LfomSheet + Z_LfomChannelOrifice
], [0; 0; 0]*deg)
# GroupDelete
ChannelSubtractions := SubtractF(["EtCon"], "DeleteMe")
LfomSheetLayer := layer_new("LfomSheet", ltpurple)
LfomSheet := BoxF(LfomSheet_Origin, LfomSheet_Origin + LfomSheet_Dim, [0; 0; 0]*deg)
LfomChannelSheet := BoxF([
    LfomChannel_Origin[0] + T_LfomSheet;
    LfomChannel_Origin[1];
    LfomChannel_Origin[2] + Z_LfomChannelOrifice
], [
    LfomChannel_Origin[0] - T_LfomSheet - L_LfomChannel;
    LfomChannel_Origin[1] + W_LfomChannel;
    LfomChannel_Origin[2] + T_LfomSheet + Z_LfomChannelOrifice
], [0; 0; 0]*deg)
FrzLfomSheetLayer := FreezeLayer("LfomSheet")
0.5*(S_LfomOrificesMin + D_LfomOrifices) = 0.024725 m
LfomOrifices :=
    Local ← FrzLfomSheetLayer
    for h ∈ 0 .. last(H_LfomOrifices)
        if N_LfomOrifices[h] ≠ 0
            Local ← stack(Local, CylinderF([
                (LfomSheet_Origin[0] - T_ConcreteMin - 0.5*(D_LfomOrifices + S_LfomOrificesMin)) - 0.5*(S_LfomOrificesMin + D_LfomOrifices)*(mod(h, 2) == 0);
                LfomSheet_Origin[1];
                Z_LfomChannelBottom + T_ConcreteMin + HW_LfomChannel + H_Freefall + H_LfomOrifices[h]
            ], D_LfomOrifices/2, T_LfomSheet + zc, [-90; 0]*deg))
        Local ← stack(Local, ArrayLast(1, N_LfomOrifices[h], -(D_LfomOrifices + S_LfomOrificesMin))) if N_LfomOrifices[h] > 1
    return Local
LfomChannelOrifice := CylinderF([
    LfomChannel_Origin[0] - L_LfomChannel/2;
    LfomChannel_Origin[1] + W_LfomChannel/2;
    LfomChannel_Origin[2] + Z_LfomChannelOrifice
], D_LfomChannelOrifice/2, T_LfomSheet + zc, [0; 0]*deg)
H_LfomOrifices = [0.022225; 0.072225; 0.122225; 0.172225; 0.222225; 0.272225; 0.322225; 0.372225] m
RotateOrifice := Rotate3DLast([
    LfomChannel_Origin[0] - L_LfomChannel/2;
    LfomChannel_Origin[1] + W_LfomChannel/2;
    LfomChannel_Origin[2] + Z_LfomChannelOrifice
], "y", 90 deg)
# GroupDelete
SubtractLfomOrifices := SubtractF(["LfomSheet"], "DeleteMe")
ThawSheets := ThawMultiple(["LfomSheet"])
Et_Origin[0] - L_Et - .5*T_PlantWall - 1/2*W_EtWalkway - .5*T_ChannelWall
MirrorSheets := Mirror3dAll("YZ", [Et_Origin[0] - L_Et - 1/2*W_TrainWalkway - T_PlantWall; 0 m; 0 m], "N")
FreezeSheets := FreezeMultiple(["LfomSheet"])
LfomChannelScript := stack(EtConLayer, LfomChannel, LfomChannelFill, RMChannel, RMChannelTop, FreezeEtcon, RMChannelSubtraction, ChannelSubtraction, SlopeSubtraction, SlopeSubtraction2, LfomSheetSubtraction, LfomSheetSlotSubtraction, LfomChannelOrificeSheetSubtraction, GroupDelete, ChannelSubtractions, LfomSheetLayer, LfomSheet, LfomChannelSheet, LfomOrifices, LfomChannelOrifice, RotateOrifice, GroupDelete, SubtractLfomOrifices, ThawSheets, MirrorSheets, FreezeSheets)
# Hopper Drains
DrainCouplingLayer := layer_new("EtDrainCouplingsPlu", green)
DrainWeirCoupling := CouplingSUBF([
    -S_Fitting - ConRadius(ND_EtDrain);
    ConRadius(ND_EtDrain) + S_Fitting + 1/2*W_Et - T_ChannelWall + T_ConcreteMin;
    -SocketDepth(ND_EtDrain)
] + Et_Origin, [0; 270]*deg, ND_EtDrain, PS_Default, ["EtCon"])
DrainCouplings :=
    Local ← stack(DrainCouplingLayer, DrainWeirCoupling)
    for i ∈ 0 .. (N_EtFullHopper + (AddHopper - 1))
        Local ← stack(Local, CouplingSUBF([
            -(L_EtHopper + T_EtHopperLedge)*i - S_Fitting - ConRadius(ND_EtDrain);
            ConRadius(ND_EtDrain) + S_Fitting + 1/2*W_Et - T_ChannelWall + T_ConcreteMin;
            -SocketDepth(ND_EtDrain)
        ] + Et_Origin, [0; 270]*deg, ND_EtDrain, PS_Default, ["EtCon"]))
FreezeDrainCouplings := FreezeLayer("EtDrainCouplingsPlu")
DrainPipeLayer := layer_new("EtDrainPipesPlu", blue)
DrainPipes :=
    Local ← stack(FreezeDrainCouplings, DrainPipeLayer)
    for i ∈ 0 .. N_EtFullHopper + (AddHopper - 1)
        Local ← stack(Local, PipeSUBF([
            -(L_EtHopper + T_EtHopperLedge)*i - S_Fitting - ConRadius(ND_EtDrain);
            ConRadius(ND_EtDrain) + S_Fitting + .5*W_Et - T_ChannelWall + T_ConcreteMin;
            SocketDepth(ND_EtDrain) - CouplingLength(ND_EtDrain)
        ] + Et_Origin, T_PlantWall, [0; 270; 0]*deg, ND_EtDrain, PS_Default, ["EtCon"]))
FreezePipes := FreezeLayer("EtDrainPipesPlu")
StopperLayer := layer_new("EtDrainStoppersPlu", red)
L_EtDrainStopper := H_Et - H_PlantFreeboard/2 + SocketDepth(ND_EtDrain)
FirstStopper := PipeF([
    -S_Fitting - ConRadius(ND_EtDrain);
    ConRadius(ND_EtDrain) + S_Fitting + .5*W_Et - T_ChannelWall + T_ConcreteMin;
    -SocketDepth(ND_EtDrain)
] + Et_Origin, L_EtDrainStopper, [0; 90; 0]*deg, ND_EtDrain, PS_Default)
StopperPipes :=
    Local ← stack(FreezePipes, StopperLayer)
    for i ∈ 0 .. N_EtFullHopper + (AddHopper - 1)
        Local ← stack(Local, PipeF([
            -(L_EtHopper + T_EtHopperLedge)*i - S_Fitting - ConRadius(ND_EtDrain);
            ConRadius(ND_EtDrain) + S_Fitting + .5*W_Et - T_ChannelWall + T_ConcreteMin;
            -SocketDepth(ND_EtDrain)
        ] + Et_Origin, L_EtDrainStopper, [0; 90; 0]*deg, ND_EtDrain, PS_Default))
FreezeStopper := FreezeLayer("EtDrainStoppersPlu")
EtDrainsRight := stack(DrainCouplings, DrainPipes, StopperPipes, FreezeStopper)
ThawDrains := ThawMultiple(["EtCon"; "EtDrainCouplingsPlu"; "EtDrainPipesPlu"; "EtWeir"; "EtTrashrack"; "Cdc"; "CdcFittings"; "EtDrainStoppersPlu"])
MirrorDrains := Mirror3dAll("YZ", [Plant_Origin[0] - 1/2*L_Sed; 0 m; 0 m], "Y")
FreezeDrains := FreezeMultiple(["EtCon"; "EtDrainCouplingsPlu"; "EtDrainPipesPlu"; "EtWeir"; "EtTrashrack"; "Cdc"; "CdcFittings"; "EtDrainStoppersPlu"])
EtDrainsLeft := stack(ThawDrains, MirrorDrains, FreezeDrains)
# Overflow Drain Grit
# The half of the PVC overflow channel closer to the right-hand end of the tank (from top view):
L_EtFrontToOverflowWeir := .5*L_EtHopperFront + 2*ConRadius(ND_EtDrain) + 2*S_Fitting + ConRadius(ND_EtOverflowDrain)
EtChannelPipe1 := PipeF(Et_Origin + [
    -CapThickness(ND_EtOverflowDrain);
    L_EtFrontToOverflowWeir;
    H_EtHopper + HL_Flowmeasure - innerdiameter(ND_EtOverflowDrain, PS_Default)/2 + H_EtOverflowCutaway + H_EtLFOMtoOverflow
], L_EtChannelPipes, [0; 0; 0]*deg, ND_EtOverflowDrain, PS_Default)
# The half of the PVC overflow channel closer to the trash rack:
EtChannelPipe2 := PipeF(Et_Origin + [
    -CapThickness(ND_EtOverflowDrain) - L_EtChannelPipes - TeeLength(ND_EtOverflowDrain);
    L_EtFrontToOverflowWeir;
    H_EtHopper + HL_Flowmeasure - innerdiameter(ND_EtOverflowDrain, PS_Default)/2 + H_EtOverflowCutaway + H_EtLFOMtoOverflow
], L_EtChannelPipes, [0; 0; 0]*deg, ND_EtOverflowDrain, PS_Default)
EtOverflowTee := TeeF(Et_Origin + [
    -CapThickness(ND_EtOverflowDrain) - L_EtChannelPipes - TeeLength(ND_EtOverflowDrain)/2;
    L_EtFrontToOverflowWeir;
    H_EtHopper + HL_Flowmeasure - innerdiameter(ND_EtOverflowDrain, PS_Default)/2 + H_EtOverflowCutaway + H_EtLFOMtoOverflow - ShortTeeLength(ND_EtOverflowDrain)
], [0; 0; -90]*deg, ND_EtOverflowDrain, PS_Default)
EtOverflowCap1 := CapF(Et_Origin + [
    -CapThickness(ND_EtOverflowDrain);
    L_EtFrontToOverflowWeir;
    H_EtHopper + HL_Flowmeasure - innerdiameter(ND_EtOverflowDrain, PS_Default)/2 + H_EtOverflowCutaway + H_EtLFOMtoOverflow
], [0; 0; 0]*deg, ND_EtOverflowDrain)
EtOverflowCap2 := CapF(Et_Origin + [
    -CapThickness(ND_EtOverflowDrain) - 2*L_EtChannelPipes - TeeLength(ND_EtOverflowDrain);
    L_EtFrontToOverflowWeir;
    H_EtHopper + HL_Flowmeasure - innerdiameter(ND_EtOverflowDrain, PS_Default)/2 + H_EtOverflowCutaway + H_EtLFOMtoOverflow
], [0; 180; 0]*deg, ND_EtOverflowDrain)
L_EtOverflowPipeVert0 := H_EtHopper + HL_Flowmeasure - innerdiameter(ND_EtOverflowDrain, PS_Default)/2 + H_EtOverflowCutaway + H_EtLFOMtoOverflow - ShortTeeLength(ND_EtOverflowDrain) + T_PlantWall + zc
EtOverflowPipeVert := PipeSUBF(Et_Origin + [
    -CapThickness(ND_EtOverflowDrain) - L_EtChannelPipes - TeeLength(ND_EtOverflowDrain)/2;
    L_EtFrontToOverflowWeir;
    H_EtHopper + HL_Flowmeasure - innerdiameter(ND_EtOverflowDrain, PS_Default)/2 + H_EtOverflowCutaway + H_EtLFOMtoOverflow - ShortTeeLength(ND_EtOverflowDrain)
], L_EtOverflowPipeVert0, [0; -90; 0]*deg, ND_EtOverflowDrain, PS_Default, ["EtCon"])
EtOverflowElbow := ElbowSUBF(Et_Origin + [
    -CapThickness(ND_EtOverflowDrain) - L_EtChannelPipes - TeeLength(ND_EtOverflowDrain)/2;
    L_EtFrontToOverflowWeir;
    -T_PlantWall - ConRadius(ND_EtOverflowDrain) + ElbowRadius(ND_EtOverflowDrain)
], [90; 270; 0]*deg, ND_EtOverflowDrain, PS_Default, ["EtCon"])
EtOverflowWeirSlot := BoxF(Et_Origin + [
    0;
    L_EtFrontToOverflowWeir - W_EtOverflowSlot/2;
    H_EtHopper + HL_Flowmeasure + H_EtLFOMtoOverflow - zc
], Et_Origin + [
    -CapThickness(ND_EtOverflowDrain) - L_EtOverflowWeir/2;
    L_EtFrontToOverflowWeir + W_EtOverflowSlot/2;
    H_EtHopper + HL_Flowmeasure + H_EtOverflowCutaway + H_EtLFOMtoOverflow + CapThickness(ND_EtOverflowDrain) + 2*zc
], [0; 0; 0]*deg)
EtOverflowFittingLayer := layer_new("EtOverflowFittingPlu", green)
FreezeEtOverflowFittings := FreezeLayer("EtOverflowFittingPlu")
EtOverflowPipeLayer := layer_new("EtOverflowPipePlu", blue)
FreezeEtOverflowPipe := FreezeLayer("EtOverflowPipePlu")
SubtractSlotFromFittings := SubtractF(["EtOverflowFittingPlu"], "DeleteMe")
SubtractSlotFromPipes := SubtractF(["EtOverflowPipePlu"], "DeleteMe")
EtOverflowPluScript0 := stack(EtOverflowFittingLayer, EtOverflowTee, EtOverflowCap1, EtOverflowCap2, FreezeEtOverflowFittings, EtOverflowPipeLayer, EtOverflowPipeVert, EtChannelPipe1, EtChannelPipe2, FreezeEtOverflowPipe, EtOverflowWeirSlot, GroupDelete, SubtractSlotFromFittings, EtOverflowWeirSlot, GroupAll("DeleteMe"), SubtractSlotFromPipes)
# Overflow Drain No Grit
EtOverflowElbow_Origin := [
    -L_Et + 2*(S_Fitting + ConRadius(ND_RMPipe)) + SocketDepth(ND_EtOverflowDrain) + ElbowRadius(ND_EtOverflowDrain);
    W_Et/2;
    -max(T_PlantWall, CouplingLength(ND_EtOverflowDrain)) - SocketDepth(ND_EtOverflowDrain)
] + Et_Origin
EtOverflowCoupling_Origin := [
    -L_Et + 2*(S_Fitting + ConRadius(ND_RMPipe)) + SocketDepth(ND_EtOverflowDrain) + ElbowRadius(ND_EtOverflowDrain);
    W_Et/2;
    -SocketDepth(ND_EtOverflowDrain)
] + Et_Origin
EtOverflowTee_Origin := [
    EtOverflowCoupling_Origin[0];
    EtOverflowCoupling_Origin[1];
    Et_Origin[2] + H_Et - H_PlantFreeboard + H_EtLFOMtoOverflow + H_EtOverflowCutaway - innerdiameter(ND_EtOverflowDrain, PS_Default)/2 - ShortTeeLength(ND_EtOverflowDrain)
]
EtOverflowCap1_Origin := [
    EtOverflowTee_Origin[0];
    Et_Origin[1] + W_Et - CapThickness(ND_EtOverflowDrain);
    EtOverflowTee_Origin[2] + ShortTeeLength(ND_EtOverflowDrain)
]
EtOverflowCap2_Origin := [
    EtOverflowTee_Origin[0];
    Et_Origin[1] + CapThickness(ND_EtOverflowDrain);
    EtOverflowTee_Origin[2] + ShortTeeLength(ND_EtOverflowDrain)
]
EtOverflowFittingsLayer := layer_new("EtOverflowDrainFittingsPlu", green)
EtOverflowElbow := ElbowF(EtOverflowElbow_Origin, [0; 0; 270]*deg, ND_EtOverflowDrain, PS_Default)  # must subtract out of drain channel later
.
EtOverflowCoupling := CouplingSUBF(EtOverflowCoupling_Origin, [0; 270]*deg, ND_EtOverflowDrain, PS_Default, ["EtCon"])
EtOverflowTee := TeeF(EtOverflowTee_Origin, [90; 270; 0]*deg, ND_EtOverflowDrain, PS_Default)
EtOverflowCap1 := CapF(EtOverflowCap1_Origin, [90; 0]*deg, ND_EtOverflowDrain)
EtOverflowCap2 := CapF(EtOverflowCap2_Origin, [270; 0]*deg, ND_EtOverflowDrain)
EtOverflowFittingsFrz := FreezeLayer("EtOverflowDrainFittingsPlu")
EtOverflowCutaway := BoxF([W_EtOverflowSlot/1.5; CapThickness(ND_EtOverflowDrain); ConRadius(ND_EtOverflowDrain) + zc] + EtOverflowCap1_Origin, [
    -W_EtOverflowSlot/1.5;
    -CapThickness(ND_EtOverflowDrain);
    innerdiameter(ND_EtOverflowDrain, PS_Default)/2 - H_EtOverflowCutaway
] + EtOverflowCap2_Origin, [0; 0; 0]*deg)
EtOverflowFittingsSub := SubtractF(["EtOverflowDrainFittingsPlu"], "DeleteMe")
EtOverflowFittingsPlu := stack(EtOverflowFittingsLayer, EtOverflowElbow, EtOverflowCoupling, EtOverflowTee, EtOverflowCap1, EtOverflowCap2, EtOverflowFittingsFrz, EtOverflowCutaway, GroupDelete, EtOverflowFittingsSub)
EtOverflowPipesLayer := layer_new("EtOverflowDrainPlu", blue)
L_EtOverflowNipple := EtOverflowCoupling_Origin[2] - CouplingLength(ND_EtOverflowDrain) + 2*SocketDepth(ND_EtOverflowDrain) - EtOverflowElbow_Origin[2]
EtOverflowNipple := PipeSUBF(EtOverflowElbow_Origin, L_EtOverflowNipple, [0; 90]*deg, ND_EtOverflowDrain, PS_Default, ["EtCon"])
L_EtOverflowPipeVert1 := EtOverflowTee_Origin[2] - EtOverflowCoupling_Origin[2]
EtOverflowVertPipe := PipeF(EtOverflowCoupling_Origin, L_EtOverflowPipeVert1, [0; 90]*deg, ND_EtOverflowDrain, PS_Default)
L_EtOverflowHorizPipes := 0.5*(W_Et - 2*CapThickness(ND_EtOverflowDrain) - TeeLength(ND_EtOverflowDrain))
EtOverflowHorizPipe1 := PipeF(EtOverflowCap1_Origin, L_EtOverflowHorizPipes, [90; 0]*deg, ND_EtOverflowDrain, PS_Default)
EtOverflowHorizPipe2 := PipeF(EtOverflowCap2_Origin, L_EtOverflowHorizPipes, [270; 0]*deg, ND_EtOverflowDrain, PS_Default)
EtOverflowPipesFrz := FreezeLayer("EtOverflowDrainPlu")
EtOverflowPipesSub := SubtractF(["EtOverflowDrainPlu"], "DeleteMe")
EtOverflowPipesPlu := stack(EtOverflowPipesLayer, EtOverflowNipple, EtOverflowVertPipe, EtOverflowHorizPipe1, EtOverflowHorizPipe2, EtOverflowPipesFrz, EtOverflowCutaway, GroupDelete, EtOverflowPipesSub)
EtOverflowPluScript1 := stack(EtOverflowFittingsPlu, EtOverflowPipesPlu)
# Flow Control Drain Grit
L_EtFlowControlComponents := 2*MaleAdapterLength(ND_EtFlowControl) + ValveLength(ND_EtFlowControl) - 2*ValveSocket(ND_EtFlowControl) + SocketDepth(ND_EtFlowControl) + ElbowRadius(ND_EtFlowControl)
Z_EtFlowControl := max(Z_Walkway + ConRadius(ND_EtFlowControl), Et_Origin[2] - H_EtDC - T_PlantWall + ConRadius(ND_EtFlowControl) + 2*ElbowRadius(ND_EtFlowControl) + 2*SocketDepth(ND_EtFlowControl)) = 2.51787 m
EtFlowControlPipeLayer := layer_new("EtFlowControlPipePlu", blue)
L_EtFlowControlHorizPipe1 := SocketDepth(ND_EtFlowControl) + T_PlantWall
L_EtFlowControlHorizPipe2 := SocketDepth(ND_EtFlowControl) + T_PlantWall + 2*MaleAdapterLength(ND_EtFlowControl) + ValveLength(ND_EtFlowControl) - 2*ValveSocket(ND_EtFlowControl)
EtFlowControlHorizPipe1_Origin := [
    Et_Origin[0] + T_PlantWall + SocketDepth(ND_EtFlowControl);
    Et_Origin[1] + .5*L_EtHopperFront + 3*ConRadius(ND_EtDrain) + S_Fitting;
    Z_EtFlowControl
]
EtFlowControlHorizPipe1 := PipeSUBF(EtFlowControlHorizPipe1_Origin, L_EtFlowControlHorizPipe1, [0; 0; 0]*deg, ND_EtFlowControl, PS_Default, ["EtCon"])
EtFlowControlHorizPipe2 := PipeSUBF([
    Et_Origin[0] + L_EtFlowControlHorizPipe2;
    EtFlowControlHorizPipe1_Origin[1];
    min(Et_Origin[2] - T_PlantWall - ConRadius(ND_EtFlowControl), Z_EtFlowControl - 2*ElbowRadius(ND_EtFlowControl) - 2*SocketDepth(ND_EtFlowControl))
], L_EtFlowControlHorizPipe2, [0; 0; 0]*deg, ND_EtFlowControl, PS_Default, ["EtCon"])
EtFlowControlNipple1 := PipeF([
    Et_Origin[0] + T_PlantWall + SocketDepth(ND_EtFlowControl) + 2*MaleAdapterLength(ND_EtFlowControl) + ValveLength(ND_EtFlowControl) - 2*ValveSocket(ND_EtFlowControl);
    EtFlowControlHorizPipe1_Origin[1];
    Z_EtFlowControl
], 2*SocketDepth(ND_EtFlowControl), [0; 0; 0]*deg, ND_EtFlowControl, PS_Default)
L_EtFlowControlVert := Z_EtFlowControl - min(Et_Origin[2] - T_PlantWall - ConRadius(ND_EtFlowControl), Z_EtFlowControl - 2*ElbowRadius(ND_EtFlowControl) - 2*SocketDepth(ND_EtFlowControl)) - 2*ElbowRadius(ND_EtFlowControl) = 0.1524 m
EtFlowControlVertPipe_Origin := [
    Et_Origin[0] + T_PlantWall + SocketDepth(ND_EtFlowControl) + 2*MaleAdapterLength(ND_EtFlowControl) + ValveLength(ND_EtFlowControl) - 2*ValveSocket(ND_EtFlowControl) + ElbowRadius(ND_EtFlowControl);
    EtFlowControlHorizPipe1_Origin[1];
    Z_EtFlowControl - ElbowRadius(ND_EtFlowControl)
]
EtFlowControlVertPipe := PipeF(EtFlowControlVertPipe_Origin, L_EtFlowControlVert, [0; 270]*deg, ND_EtFlowControl, PS_Default)
EtFlowControlFittingLayer := layer_new("EtFlowControlFittingPlu", green)
EtFlowControlElbow1 := ElbowF([
    EtFlowControlVertPipe_Origin[0] - ElbowRadius(ND_EtFlowControl);
    EtFlowControlHorizPipe1_Origin[1];
    min(Et_Origin[2] - T_PlantWall - ConRadius(ND_EtFlowControl), Z_EtFlowControl - 2*ElbowRadius(ND_EtFlowControl) - 2*SocketDepth(ND_EtFlowControl))
], [-90; 0; 90]*deg, ND_EtFlowControl, PS_Default)
EtFlowControlElbow2 := ElbowF([
    EtFlowControlVertPipe_Origin[0] - ElbowRadius(ND_EtFlowControl);
    EtFlowControlHorizPipe1_Origin[1];
    Z_EtFlowControl
], [-90; 0; -90]*deg, ND_EtFlowControl, PS_Default)
EtFlowControlAdapterLayer := layer_new("EtFlowControlAdapterPlu", blue3)
EtFlowControlAdapter1 := MaleAdapterF([EtFlowControlHorizPipe1_Origin[0]; EtFlowControlHorizPipe1_Origin[1]; Z_EtFlowControl], [180; 0]*deg, ND_EtFlowControl, PS_Default)
EtFlowControlAdapter2 := MaleAdapterF([
    Et_Origin[0] + T_PlantWall + 2*MaleAdapterLength(ND_EtFlowControl) + ValveLength(ND_EtFlowControl) - 2*ValveSocket(ND_EtFlowControl) - SocketDepth(ND_EtFlowControl);
    EtFlowControlHorizPipe1_Origin[1];
    Z_EtFlowControl
], [0; 0]*deg, ND_EtFlowControl, PS_Default)
EtFlowControlValveLayer := layer_new("EtFlowControlValvePlu", blue2)
EtFlowControlValve := insertdwg("https://confluence.cornell.edu/download/attachments/173604905/Et-Scaled-Gate-Valve-Threaded.dwg", [
    EtFlowControlHorizPipe1_Origin[0] - SocketDepth(ND_EtFlowControl) + MaleAdapterLength(ND_EtFlowControl) - ValveSocket(ND_EtFlowControl) + ValveLength(ND_EtFlowControl);
    EtFlowControlHorizPipe1_Origin[1];
    Z_EtFlowControl
], 2*outerradius(ND_EtFlowControl)/(1.16 m), 2*outerradius(ND_EtFlowControl)/(1.16 m), 0 deg)
FlowControlScript0 := stack(EtFlowControlPipeLayer, EtFlowControlHorizPipe1, EtFlowControlHorizPipe2, EtFlowControlNipple1, EtFlowControlVertPipe, FreezeLayer("EtFlowControlPipePlu"), EtFlowControlFittingLayer, EtFlowControlElbow1, EtFlowControlElbow2, FreezeLayer("EtFlowControlFittingPlu"), EtFlowControlAdapterLayer, EtFlowControlAdapter1, EtFlowControlAdapter2, FreezeLayer("EtFlowControlAdapterPlu"), EtFlowControlValveLayer, EtFlowControlValve, FreezeLayer("EtFlowControlValvePlu"))
# Flow Control Drain No Grit
EtFlowControlCoupling_Origin := [-L_Et - SocketDepth(ND_EtFlowControl); ConRadius(ND_EtFlowControl); 0] + Et_Origin
L_EtFlowControlPipe := max(T_PlantWall - CouplingLength(ND_EtFlowControl), 0) + 2*SocketDepth(ND_EtFlowControl) + S_Fitting
EtFlowControlAdapter1_Origin := [-L_EtFlowControlPipe + SocketDepth(ND_EtFlowControl); 0; 0] + EtFlowControlCoupling_Origin
EtFlowControlValve_Origin := [
    -MaleAdapterLength(ND_EtFlowControl) + SocketDepth(ND_EtFlowControl) + ValveSocket(ND_EtFlowControl);
    0;
    0
] + EtFlowControlAdapter1_Origin
EtFlowControlAdapter2_Origin := [
    -ValveLength(ND_EtFlowControl) + ValveSocket(ND_EtFlowControl) - MaleAdapterLength(ND_EtFlowControl) + SocketDepth(ND_EtFlowControl);
    0;
    0
] + EtFlowControlValve_Origin
EtFlowControlElbow_Origin := [-2*SocketDepth(ND_EtFlowControl); 0; 0] + EtFlowControlAdapter2_Origin
EtFlowControlFittingLayer := layer_new("EtFlowControlFittingPlu", green)
EtFlowControlCoupling := CouplingSUBF(EtFlowControlCoupling_Origin, [0; 0], ND_EtFlowControl, PS_Default, ["EtCon"])
EtFlowControlAdapter1 := MaleAdapterF(EtFlowControlAdapter1_Origin, [0; 0], ND_EtFlowControl, PS_Default)
EtFlowControlValve := insertdwg("https://confluence.cornell.edu/download/attachments/173604905/Et-Scaled-Gate-Valve-Threaded.dwg", EtFlowControlValve_Origin, 2*outerradius(ND_EtFlowControl)/(1.16 m), 2*outerradius(ND_EtFlowControl)/(1.16 m), 0 deg)
EtFlowControlAdapter2 := MaleAdapterF(EtFlowControlAdapter2_Origin, [180; 0]*deg, ND_EtFlowControl, PS_Default)
EtFlowControlElbow := ElbowF(EtFlowControlElbow_Origin, [90; 0; 90]*deg, ND_EtFlowControl, PS_Default)
EtFlowControlFittingsFrz := FreezeLayer("EtFlowControlFittingsPlu")
EtFlowControlFittings :=
    stack(EtFlowControlFittingLayer, EtFlowControlCoupling, EtFlowControlAdapter1, EtFlowControlValve, EtFlowControlFittingsFrz) if Z_Walkway ≤ Z_Et
    stack(EtFlowControlFittingLayer, EtFlowControlCoupling, EtFlowControlAdapter1, EtFlowControlValve, EtFlowControlAdapter2, EtFlowControlElbow, EtFlowControlFittingsFrz) otherwise
EtFlowControlPipeLayer := layer_new("EtFlowControlPipePlu", blue)
EtFlowControlPipe := PipeSUBF(EtFlowControlCoupling_Origin + [-CouplingLength(ND_EtFlowControl) + 2*SocketDepth(ND_EtFlowControl); 0; 0], L_EtFlowControlPipe, [0; 0], ND_EtFlowControl, PS_Default, ["EtCon"])
L_EtFlowControlNipple := 2*SocketDepth(ND_EtFlowControl)
EtFlowControlNipple := PipeF(EtFlowControlAdapter2_Origin, L_EtFlowControlNipple, [0; 0], ND_EtFlowControl, PS_Default)
L_EtFlowControlVertPipe := Z_Et - Z_Walkway + SocketDepth(ND_EtFlowControl)
EtFlowControlVertPipe := PipeF(EtFlowControlElbow_Origin + [-ElbowRadius(ND_EtFlowControl); 0; -ElbowRadius(ND_EtFlowControl)], L_EtFlowControlVertPipe, [0; 90]*deg, ND_EtFlowControl, PS_Default)
EtFlocControlPipeFrz := FreezeLayer("EtFlowControlPipePlu")
EtFlowControlPipes :=
    stack(EtFlowControlPipeLayer, EtFlowControlPipe, EtFlocControlPipeFrz) if Z_Walkway ≤ Z_Et
    stack(EtFlowControlPipeLayer, EtFlowControlPipe, EtFlowControlNipple, EtFlowControlVertPipe, EtFlocControlPipeFrz) otherwise
FlowControlScript1 := stack(EtFlowControlFittings, EtFlowControlPipes)
# Inlet Pipe
EtInletElbow_Origin0 := Et_Origin + [
    0 m;
    L_EtFrontToOverflowWeir + ConRadius(ND_EtOverflowDrain) + S_Fitting + ConRadius(ND_EtInlet);
    H_Et + ConRadius(ND_EtInlet)
]
EtInletElbow_Origin1 := Et_Origin + [
    ElbowRadius(ND_EtInlet) - S_Fitting - ConRadius(ND_EtInlet);
    0.5*W_Et;
    H_Et + ConRadius(ND_EtInlet) + ElbowRadius(ND_EtInlet) - SocketDepth(ND_EtInlet)
]
EtInletElbow_Origin2 := Et_Origin + [
    ConRadius(ND_EtInlet);
    L_EtFrontToOverflowWeir + ConRadius(ND_EtOverflowDrain) + S_Fitting + ConRadius(ND_EtInlet);
    H_Et + ConRadius(ND_EtInlet)
]
EtInletElbow_Origin :=
    EtInletElbow_Origin0 if EN_EtGrit == 0 and EN_DoubleTrain == 0
    EtInletElbow_Origin2 if EN_DoubleTrain == 1
    EtInletElbow_Origin1 otherwise
EtInletPipeLayer := layer_new("EtInletPipePlu", blue)
EtInletFittingLayer := layer_new("EtInletFittingPlu", green)
ND_EtInlet = 0.508 m
EtInletElbow := ElbowF(EtInletElbow_Origin, [90; 0; 90]*deg, ND_EtInlet, PS_Default)
L_EtInletPipe := 1 m
EtInletPipe := PipeF(EtInletElbow_Origin + [L_EtInletPipe; 0; 0], L_EtInletPipe, [0; 0; 0]*deg, ND_EtInlet, PS_Default)
FreezeEtInletPipe := FreezeLayer("EtInletPipePlu")
FreezeEtInletFittings := FreezeLayer("EtInletFittingPlu")
EtInletScript := stack(EtInletFittingLayer, EtInletElbow, FreezeEtInletFittings, EtInletPipeLayer, EtInletPipe, FreezeEtInletPipe)
# Add Water Levels
EtWaterLayer := layer_new("EtWater", blue2)
EtWater := BoxF(Et_Origin, [Et_Origin[0] - L_Et; Et_Origin[1] + W_Et; ZW_Et], [0; 0; 0]*deg)
EtRMPipeWater := CylinderF(RMElbow_Origin + [0; ElbowRadius(ND_RMPipe); ElbowRadius(ND_RMPipe)], innerdiameter(ND_RMPipe, PS_Default)/2, ZW_RMPipe - RMElbow_Origin[2] - ElbowRadius(ND_RMPipe), [0; 90]*deg)
EtWaterFrz := FreezeLayer("EtWater")
EtWaterScript := stack(EtWaterLayer, EtWater, EtRMPipeWater, EtWaterFrz)
AC_EntranceTank :=
    stack(EtTankScript, EtTrashRackScript, EtOverflowPluScript0, EtDrainsRight, RMScript, FlowControlScript0, EtInletScript) if EN_EtGrit == 0 and EN_LfomPipe == 1
    stack(EtTankScript, ModificationScript, EtTrashRackScript, EtOverflowPluScript0, EtDrainsRight, LfomChannelScript, FlowControlScript0, EtInletScript) if EN_EtGrit == 0 and EN_LfomPipe == 0
    stack(EtTankScript, EtOverflowPluScript1, RMScript, FlowControlScript1, EtInletScript) otherwise
AC_EntranceTankWater :=
    stack(EtTankScript, EtTrashRackScript, EtOverflowPluScript0, EtDrainsRight, RMScript, FlowControlScript0, EtInletScript, EtWaterScript) if EN_EtGrit == 0 and EN_LfomPipe == 1
    stack(EtTankScript, EtTrashRackScript, EtOverflowPluScript0, EtDrainsRight, LfomChannelScript, FlowControlScript0, EtInletScript, EtWaterScript) if EN_EtGrit == 0 and EN_LfomPipe == 0
    stack(EtTankScript, EtOverflowPluScript1, RMScript, FlowControlScript1, EtInletScript, EtWaterScript) otherwise
AC_EntranceTank :=
    AC_EntranceTank if EN_Water == 0
    AC_EntranceTankWater otherwise
# [component: inputs stack(AC_EntranceTank, AC_Cdc, AC_ChemTanks, AC_FlocTank)]
