Q_Plant := 1.6*L/s
# [reference: ExpertInputs.xmcd]
# [reference: MathFunctions.xmcd]
# [reference: PipeDatabase.xmcd]
# [reference: MaterialsDatabase.xmcd]
# [reference: FluidsFunctions.xmcd]
# [reference: CdcFunctions.xmcd]
# [reference: SedimentationTankjem384.xmcd]
# [reference: Flocculator.xmcd]
# [reference: LFOM.xmcd]
# [reference: EntranceTankLowjem384.xmcd]
# [reference: LFStackedRapidSandFilter.xmcd]
# [reference: LinearCdc.xmcd]
# [reference: ChemStorageTanks.xmcd]
# AutoCAD drawing programs:
# Translators:
# These are the codes that take MathCAD outputs and create AutoCAD scripts that are used to draw the plant (formerly Basics)
# [reference: MtoATranslators.xmcd]
# The wrapped MtoA translator contains the functions that the user will want to access. These functions will draw pieces with full functionality - specifying the location, dimension, and orientation of the object. Also, it contains layer control and subtraction capabilities for grouped objects.
# [reference: MtoATranslatorsWrapped.xmcd]
# Drawing functions:
# [reference: ChannelF.xmcd]
# [reference: PlumbingF.xmcd]
# [reference: TankF.xmcd]
# [reference: StairsF.xmcd]
# [reference: DrainChannelF.xmcd]
# AutoCAD Script Files:
# [reference: FlocculatorACLow.xmcd]
# [reference: SedimentationTankACLow_jem384.xmcd]
# Entrance Tank AutoCAD
# Entrance Tank Concrete
# Origins and dimensions
Et_Origin := [Plant_Origin[0]; Floc_Origin[1] + L_Floc + 2*L_ChannelSlot + T_PlantWall; Z_Et] = [0; 1.9168; 1.72856] m
Et_Dim := [L_Et; W_Et; H_Et] = [0.936859; 0.428269; 0.614253] m
EtHopper_Origin := [Et_Origin[0] - L_EtHopperOut; Et_Origin[1] + W_Et; Et_Origin[2]] = [-0.493687; 2.34507; 1.72856] m
Hopper_FarCornerIn := [Et_Origin[0] - 2*S_Fitting - 2*ConRadius(ND_EtDrain); Et_Origin[1]; Z_EtHopper] = [-0.15715; 1.9168; 2.14281] m
Hopper_FarCornerOut := [Et_Origin[0] + 2*S_Fitting + 2*ConRadius(ND_EtDrain) - L_Et; Et_Origin[1]; Z_EtHopper]
HopperBack_FarCorner := [
    Et_Origin[0] - W_Et + 2*(S_Fitting + ConRadius(ND_EtDrain));
    Et_Origin[1] + L_Et + W_Et;
    Et_Origin[2] + H_EtHopperBack
] = [-0.271119; 3.28193; 2.14281] m
EtDC_Origin := Et_Origin + [-L_EtDC; 0 m; -T_PlantWall]
# Hoppers and tank walls
EntTankLayer := layer_new("EtCon", grey)
EtHopperIn := WedgeF(EtHopper_Origin, Hopper_FarCornerIn, [0; 0; 0]*deg)
EtHopperLedge := BoxF(EtHopper_Origin, EtHopper_Origin + [-T_EtHopperLedge; -W_Et; H_EtHopper], [0; 0; 0]*deg)
EtHopperOut := WedgeF(EtHopper_Origin - [T_EtHopperLedge; 0 m; 0 m], Hopper_FarCornerOut, [0; 0; 0]*deg)
EtHopperBack := WedgeF(Et_Origin + [0; W_Et; 0], HopperBack_FarCorner, [90; 0; 0]*deg)
EntTank := Tank(Et_Origin, Et_Dim, T_PlantWall)
FreezeEntTank := FreezeLayer("EtCon")
# Trash rack slots
TrashRackSlot1 := BoxF(EtHopper_Origin + [-(T_EtHopperLedge/2) - T_ConcreteMin/2; 2*D_Rebar; H_EtHopper - 2*D_Rebar], EtHopper_Origin + [
    -T_EtHopperLedge/2 - T_ConcreteMin/2 - 2*D_Rebar;
    -W_Et - 2*D_Rebar;
    H_EtHopper + H_EtTop + H_PlantFreeboard + zc
], [0; 0; 0]*deg)
TrashRackSlot2 := BoxF(EtHopper_Origin + [-T_EtHopperLedge/2 + T_ConcreteMin/2; 2*D_Rebar; H_EtHopper - 2*D_Rebar], EtHopper_Origin + [
    -T_EtHopperLedge/2 + T_ConcreteMin/2 + 2*D_Rebar;
    -W_Et - 2*D_Rebar;
    H_EtHopper + H_EtTop + H_PlantFreeboard + zc
], [0; 0; 0]*deg)
SubtractTrashRackSlots := SubtractF(["EtCon"], "DeleteMe")
# Baffle and Baffle Slots
BaffleSlot := BoxF(Et_Origin + [
    -L_Et + S_Fitting + ConRadius(ND_EtInlet) + ElbowRadius(ND_EtInlet);
    -2*D_Rebar;
    H_EtHopper - 2*D_Rebar
], Et_Origin + [
    -L_Et + S_Fitting + ConRadius(ND_EtInlet) + 5*T_FlocBaffle + ElbowRadius(ND_EtInlet);
    W_Et + 2*D_Rebar;
    H_EtHopper + H_EtTop + H_PlantFreeboard + zc
], [0; 0; 0]*deg)  # Assumed the baffle would be made out of a few plastic baffles screwed together
SubtractBaffleSlot := SubtractF(["EtCon"], "DeleteMe")
EntBaffleLayer := layer_new("EtBaffle", purple)
Baffle := BoxF(Et_Origin + [
    -L_Et + S_Fitting + ConRadius(ND_EtInlet) + ElbowRadius(ND_EtInlet);
    -2*D_Rebar;
    H_EtHopper - 2*D_Rebar
], Et_Origin + [
    -L_Et + S_Fitting + ConRadius(ND_EtInlet) + 5*T_FlocBaffle + ElbowRadius(ND_EtInlet);
    W_Et + 2*D_Rebar;
    H_Et
], [0; 0; 0]*deg)
FreezeBaffle := FreezeLayer("EtBaffle")
EtTankScript := stack(EntTankLayer, EtHopperIn, EtHopperLedge, EtHopperOut, EtHopperBack, EntTank, Union_All, FreezeEntTank, TrashRackSlot1, TrashRackSlot2, GroupDelete, SubtractTrashRackSlots, BaffleSlot, GroupDelete, SubtractBaffleSlot, EntBaffleLayer, Baffle, FreezeBaffle)
TRLayer := layer_new("EtTrashrack", yellow)
HorizCylinder := CylinderF(EtHopper_Origin + [-T_EtHopperLedge/2 - T_ConcreteMin/2 - D_Rebar/2; 2*D_Rebar; H_EtHopper - 3/2*D_Rebar], D_Rebar/2, W_Et + 4*D_Rebar, [90; 0]*deg)
ViewRight := view("r")
ArrayHorizCylinder := ArrayLast(N_TRSpacesH + 1, 1, B_EtRebar)
ViewTop := view("t")
VertCylinder := CylinderF(EtHopper_Origin + [-T_EtHopperLedge/2 - T_ConcreteMin/2 - 3*D_Rebar/2; 3/2*D_Rebar; H_EtHopper - 2*D_Rebar], D_Rebar/2, (N_TRSpacesH + 1)*B_EtRebar - D_Rebar, [0; 90]*deg)
ArrayVertCyl := ArrayLast(1, N_TRSpacesV + 1, -B_EtRebar)
ArrayAll := array_all(1, 2, T_ConcreteMin + 2*D_Rebar)
Freeze := FreezeLayer("EtTrashrack")
ThawAll := ThawMultiple(["Et*"])
MirrorEtCon := MirrorAll([Et_Origin[0]; Et_Origin[1]], [Et_Origin[0] + zc; Et_Origin[1]], "y")
MoveEtCon := MoveAll(Et_Origin, Et_Origin + [0 m; W_Et; 0 m])
FreezeAll := FreezeMultiple(["Et*"])
EtTrashRackScript := stack(TRLayer, HorizCylinder, ViewRight, ArrayHorizCylinder, ViewTop, VertCylinder, ViewRight, ArrayVertCyl, ViewTop, ArrayAll, Freeze, ThawAll, MirrorEtCon, MoveEtCon, FreezeAll)
# Trash Rack
# Rapid Mix Pipe, LFOM, and Orifice Plate
# this is the upper elbow (connected to the LFOM)
RMElbow_Origin := [Plant_Origin[0] - W_FlocChannel/2; Et_Origin[1]; FlocCoupling_Origin[2]] = [-0.0500697; 1.9168; 0.0801625] m
RMAirRelease_Origin := [
    RMElbow_Origin[0];
    Floc_Origin[1] + L_Floc + T_PlantWall - T_FlocChannelWall + S_Fitting;
    FlocCoupling_Origin[2] + innerdiameter(ND_RMPipe, PS_Default)/2 - zc
] = [-0.0500697; 1.8168; 0.0977596] m
L_RMPipeHoriz := (RMElbow_Origin[1] - SocketDepth(ND_RMPipe)) - (Et_Origin[1] - T_PlantWall - L_FlocCouplingExt - L_ChannelSlot + CouplingLength(ND_RMPipe) - 2*SocketDepth(ND_RMPipe)) = 0.20329 m
L_RMPipeVert := Z_EtTop - (RMElbow_Origin[2] + ElbowRadius(ND_RMPipe)) = 2.18645 m
L_RMAirRelease := Floc_Origin[2] + H_Floc - (FlocCoupling_Origin[2] + innerdiameter(ND_RMPipe, PS_Default)/2 - zc)
# RM Elbow
RMElbowLayer := layer_new("EtRmElbowPlu", green)
RMElbow := ElbowSUBF(RMElbow_Origin, [0; 90; 0]*deg, ND_RMPipe, PS_Default, ["EtCon"])
FreezeRMElbow := FreezeLayer("EtRmElbowPlu")
# RM Pipes
RMPipeLayer := layer_new("EtRmPipePlu", blue)
RMVertPipe := PipeSUBF([
    RMElbow_Origin[0];
    RMElbow_Origin[1] + ElbowRadius(ND_RMPipe);
    RMElbow_Origin[2] + ElbowRadius(ND_RMPipe)
], L_RMPipeVert, [0; 90; 0]*deg, ND_RMPipe, PS_Default, ["EtCon"])
RMHorizPipe := PipeF(RMElbow_Origin, L_RMPipeHoriz, [90; 0; 0]*deg, ND_RMPipe, PS_Default)
RMAirRelease := PipeF(RMAirRelease_Origin, L_RMAirRelease, [0; 90; 0]*deg, ND_RMAirRelease, PS_Default)
RMAirReleaseHole := CylinderF([RMAirRelease_Origin[0]; RMAirRelease_Origin[1]; FlocCoupling_Origin[2]], outerradius(ND_RMAirRelease), outerradius(ND_RMPipe) + zc, [0; 90; 0]*deg)
FreezeRMPipe := FreezeLayer("EtRmPipePlu")
SelectRMPipes := SelectLayer("EtRmPipePlu")
# LFOM Orifices
LFOM_Origin0 := [RMElbow_Origin[0]; RMElbow_Origin[1] + ElbowRadius(ND_RMPipe); ZW_Et - HL_Flowmeasure]
LFOM_Origin1 := [RMElbow_Origin[0]; RMElbow_Origin[1] + ElbowRadius(ND_RMPipe); ZW_Et - HL_Flowmeasure]
LFOM_Origin :=
    LFOM_Origin0 if EN_EtGrit == 0
    LFOM_Origin1 otherwise
LfomOrifices :=
    Local ← FreezeRMPipe
    for h ∈ 0 .. last(H_LfomOrifices)
        if N_LfomOrifices[h] ≠ 0
            Local ← stack(Local, CylinderF([LFOM_Origin[0]; LFOM_Origin[1]; LFOM_Origin[2] + H_LfomOrifices[h]], D_LfomOrifices/2, outerradius(ND_RMPipe) + zc, [
                90 deg + (asin(0.5*S_LfomOrificesMin/(2*outerradius(ND_RMPipe))) + asin(D_LfomOrifices/(2*outerradius(ND_RMPipe))))*(mod(h, 2) == 0);
                0 deg
            ]))
        Local ← stack(Local, ArrayLastPolar([LFOM_Origin[0]; LFOM_Origin[1]; LFOM_Origin[2] + H_LfomOrifices[h]], N_LfomOrifices[h], (N_LfomOrifices[h] - 1)*(2*asin(D_LfomOrifices/(2*outerradius(ND_RMPipe))) + 2*asin(S_LfomOrificesMin/(2*outerradius(ND_RMPipe)))))) if N_LfomOrifices[h] > 1
    return Local
RMAirReleaseHole
SubtractRMPipeOrifices := SubtractF(["EtRmPipePlu"], "DeleteMe")
RMScript := stack(RMElbowLayer, RMElbow, FreezeRMElbow, RMPipeLayer, RMVertPipe, RMHorizPipe, FreezeRMPipe, LfomOrifices, GroupDelete, SubtractRMPipeOrifices)
# Hopper Drains
DrainCouplingLayer := layer_new("EtDrainCouplingsPlu", green)
DrainWeirCoupling := CouplingSUBF([
    -S_Fitting - ConRadius(ND_EtDrain);
    W_Et - (ConRadius(ND_EtDrain) + S_Fitting);
    -SocketDepth(ND_EtDrain)
] + Et_Origin, [0; 270]*deg, ND_EtDrain, PS_Default, ["EtCon"])
DrainCouplings :=
    Local ← stack(DrainCouplingLayer, DrainWeirCoupling)
    Local ← stack(Local, CouplingSUBF([
        -S_Fitting - ConRadius(ND_EtDrain);
        W_Et - (ConRadius(ND_EtDrain) + S_Fitting);
        -SocketDepth(ND_EtDrain)
    ] + Et_Origin, [0; 270]*deg, ND_EtDrain, PS_Default, ["EtCon"]))
    Local ← stack(Local, CouplingSUBF([
        -L_Et + S_Fitting + ConRadius(ND_EtDrain);
        W_Et - (ConRadius(ND_EtDrain) + S_Fitting);
        -SocketDepth(ND_EtDrain)
    ] + Et_Origin, [0; 270]*deg, ND_EtDrain, PS_Default, ["EtCon"]))
FreezeDrainCouplings := FreezeLayer("EtDrainCouplingsPlu")
DrainPipeLayer := layer_new("EtDrainPipesPlu", blue)
L_EtDrainPipe1 := Et_Origin[2] + SocketDepth(ND_EtDrain) - CouplingLength(ND_EtDrain) - (Z_FiInletChannelBottom - SocketDepth(ND_FiManPipe) - L_HydDisPipe - ShortTeeLength(ND_FiManPipe))
L_EtDrainPipe2 := (Et_Origin[2] + SocketDepth(ND_EtDrain) - CouplingLength(ND_EtDrain) - (Z_FiInletChannelBottom - SocketDepth(ND_FiManPipe) - L_HydDisPipe - ShortTeeLength(ND_FiManPipe))) + (ElbowRadius(ND_EtDrain) - ShortTeeLength(ND_EtDrain))
DrainPipes :=
    Local ← stack(FreezeDrainCouplings, DrainPipeLayer)
    Local ← stack(Local, PipeSUBF([
        -S_Fitting - ConRadius(ND_EtDrain);
        W_Et - (ConRadius(ND_EtDrain) + S_Fitting);
        SocketDepth(ND_EtDrain) - CouplingLength(ND_EtDrain)
    ] + Et_Origin, L_EtDrainPipe1, [0; 270; 0]*deg, ND_EtDrain, PS_Default, ["EtCon"]))
    Local ← stack(Local, PipeSUBF([
        -L_Et + S_Fitting + ConRadius(ND_EtDrain);
        W_Et - (ConRadius(ND_EtDrain) + S_Fitting);
        SocketDepth(ND_EtDrain) - CouplingLength(ND_EtDrain)
    ] + Et_Origin, L_EtDrainPipe2, [0; 270; 0]*deg, ND_EtDrain, PS_Default, ["EtCon"]))
FreezePipes := FreezeLayer("EtDrainPipesPlu")
StopperLayer := layer_new("EtDrainStoppersPlu", red)
L_EtDrainStopper := H_Et - H_PlantFreeboard/2 + SocketDepth(ND_EtDrain)
StopperPipes :=
    Local ← stack(FreezePipes, StopperLayer)
    Local ← stack(Local, PipeF([
        -S_Fitting - ConRadius(ND_EtDrain);
        W_Et - (ConRadius(ND_EtDrain) + S_Fitting);
        -SocketDepth(ND_EtDrain)
    ] + Et_Origin, L_EtDrainStopper, [0; 90; 0]*deg, ND_EtDrain, PS_Default))
    Local ← stack(Local, PipeF([
        (-L_Et + S_Fitting) + ConRadius(ND_EtDrain);
        W_Et - (ConRadius(ND_EtDrain) + S_Fitting);
        -SocketDepth(ND_EtDrain)
    ] + Et_Origin, L_EtDrainStopper, [0; 90; 0]*deg, ND_EtDrain, PS_Default))
FreezeStopper := FreezeLayer("EtDrainStoppersPlu")
EtDrainFittingsLayer := layer_new("EtDrainFittings", green)
FrzEtDrainFittings := FreezeLayer("EtDrainFittings")
L_EtDraintoDrainHoriz := (-S_Fitting - ConRadius(ND_EtDrain) - ElbowRadius(ND_EtDrain)) - ((-L_Et + S_Fitting) + ConRadius(ND_EtDrain) + ElbowRadius(ND_EtDrain)) = 0.665409 m
L_EtDraintoDCHoriz := -(Plant_Origin[0] - L_Sed - 2*T_PlantWall - W_PlantDC/2) + ((-L_Et + S_Fitting) + ConRadius(ND_EtDrain) - ShortTeeLength(ND_EtDrain)) + 2*ConRadius(ND_FlocValve) + S_Fitting + ConRadius(ND_EtDrain) = 1.80107 m
L_EtDraintoDC := Et_Origin[1] + (W_Et - (ConRadius(ND_EtDrain) + S_Fitting) - ElbowRadius(ND_EtDrain)) - (Plant_Origin[1] - 2*T_PlantWall - W_FiInletChannel - W_HumanMin)
DrainFittings :=
    Local ← EtDrainFittingsLayer
    Local ← stack(Local, ElbowF([
        -S_Fitting - ConRadius(ND_EtDrain);
        W_Et - (ConRadius(ND_EtDrain) + S_Fitting);
        SocketDepth(ND_EtDrain) - CouplingLength(ND_EtDrain) - L_EtDrainPipe1
    ] + Et_Origin, [0; 0; 270]*deg, ND_EtDrain, PS_Default))
    Local ← stack(Local, TeeF([
        (-L_Et + S_Fitting) + ConRadius(ND_EtDrain);
        W_Et - (ConRadius(ND_EtDrain) + S_Fitting);
        SocketDepth(ND_EtDrain) - CouplingLength(ND_EtDrain) - L_EtDrainPipe2
    ] + Et_Origin, [0; 0; 90]*deg, ND_EtDrain, PS_Default))
    Local ← stack(Local, ElbowF([
        (-L_Et + S_Fitting) + ConRadius(ND_EtDrain) - ShortTeeLength(ND_EtDrain) - L_EtDraintoDCHoriz;
        W_Et - (ConRadius(ND_EtDrain) + S_Fitting);
        SocketDepth(ND_EtDrain) - CouplingLength(ND_EtDrain) - L_EtDrainPipe1 - ShortTeeLength(ND_EtDrain)
    ] + Et_Origin, [90; 0; 0]*deg, ND_EtDrain, PS_Default))
DrainPiping :=
    Local ← SelectLayer("EtDrainPipesPlu")
    Local ← stack(Local, PipeF([
        -S_Fitting - ConRadius(ND_EtDrain) - ElbowRadius(ND_EtDrain);
        W_Et - (ConRadius(ND_EtDrain) + S_Fitting);
        SocketDepth(ND_EtDrain) - CouplingLength(ND_EtDrain) - L_EtDrainPipe1 - ElbowRadius(ND_EtDrain)
    ] + Et_Origin, L_EtDraintoDrainHoriz, [0; 0; 0]*deg, ND_EtDrain, PS_Default))
    Local ← stack(Local, PipeF([
        (-L_Et + S_Fitting) + ConRadius(ND_EtDrain) - ShortTeeLength(ND_EtDrain);
        W_Et - (ConRadius(ND_EtDrain) + S_Fitting);
        SocketDepth(ND_EtDrain) - CouplingLength(ND_EtDrain) - L_EtDrainPipe2 - ShortTeeLength(ND_EtDrain)
    ] + Et_Origin, L_EtDraintoDCHoriz, [0; 0; 0]*deg, ND_EtDrain, PS_Default))
    Local ← stack(Local, PipeF([
        (-L_Et + S_Fitting) + ConRadius(ND_EtDrain) - ShortTeeLength(ND_EtDrain) - L_EtDraintoDCHoriz - ElbowRadius(ND_EtDrain);
        W_Et - (ConRadius(ND_EtDrain) + S_Fitting) - ElbowRadius(ND_EtDrain);
        SocketDepth(ND_EtDrain) - CouplingLength(ND_EtDrain) - L_EtDrainPipe1 - ShortTeeLength(ND_EtDrain)
    ] + Et_Origin, L_EtDraintoDC, [90; 0; 0]*deg, ND_EtDrain, PS_Default))
EtDrainAdapterLayer := layer_new("EtDrainAdapterPlu", blue3)
EtDrainMaleAdapterScript := MaleAdapterF([
    (-L_Et + S_Fitting) + ConRadius(ND_EtDrain) - ShortTeeLength(ND_EtDrain) - L_EtDraintoDCHoriz - ElbowRadius(ND_EtDrain);
    W_Et - (ConRadius(ND_EtDrain) + S_Fitting) - ElbowRadius(ND_EtDrain) - L_EtDraintoDC;
    SocketDepth(ND_EtDrain) - CouplingLength(ND_EtDrain) - L_EtDrainPipe1 - ShortTeeLength(ND_EtDrain)
], [180; 0]*deg, ND_FlocValve, PS_Default)
EtDrainValveLayer := layer_new("EtDrainValve", blue3)
EtDrainValveScript := insertdwg("https://confluence.cornell.edu/download/attachments/173604905/Floc-Scaled-Gate-Valve-Threaded.dwg", [
    (-L_Et + S_Fitting) + ConRadius(ND_EtDrain) - ShortTeeLength(ND_EtDrain) - L_EtDraintoDCHoriz - ElbowRadius(ND_EtDrain);
    (W_Et - (ConRadius(ND_EtDrain) + S_Fitting) - ElbowRadius(ND_EtDrain) - L_EtDraintoDC + SocketDepth(ND_EtDrain)) - MaleAdapterLength(ND_EtDrain) + ValveSocket(ND_EtDrain);
    SocketDepth(ND_EtDrain) - CouplingLength(ND_EtDrain) - L_EtDrainPipe1 - ShortTeeLength(ND_EtDrain)
], 2*outerradius(ND_EtDrain)/(1.16 m), 2*outerradius(ND_EtDrain)/(1.16 m), 180 deg)
EtDrains := stack(DrainCouplings, DrainPipes, StopperPipes, FreezeStopper, DrainFittings, FrzEtDrainFittings, DrainPiping, FreezePipes, EtDrainAdapterLayer, EtDrainMaleAdapterScript, FreezeLayer("EtDrainAdapterPlu"), EtDrainValveLayer, EtDrainValveScript, FreezeLayer("EtDrainValve"))
# Not used right now. Need to find out if this would be necessary for such a small entrance tank.
# Flow Control Drain
Z_EtFlowControl := max(Z_Walkway + ConRadius(ND_EtFlowControl), Et_Origin[2] - T_PlantWall - ConRadius(ND_EtFlowControl) + 2*ElbowRadius(ND_EtFlowControl) + 2*SocketDepth(ND_EtFlowControl)) = 1.72829 m
EtFlowControlPipeLayer := layer_new("EtFlowControlPipePlu", blue)
EtFlowControlNipple1 := PipeF([
    Et_Origin[0] - 2*S_Fitting - 2*ConRadius(ND_EtDrain) - ConRadius(ND_EtFlowControl);
    Et_Origin[1] - T_PlantWall + SocketDepth(ND_EtFlowControl);
    Z_EtFlowControl
], 2*SocketDepth(ND_EtFlowControl), [90; 0; 0]*deg, ND_EtFlowControl, PS_Default)
EtFlowControlNipple2 := PipeF([
    Et_Origin[0] - 2*S_Fitting - 2*ConRadius(ND_EtDrain) - ConRadius(ND_EtFlowControl);
    Et_Origin[1] - T_PlantWall - 2*MaleAdapterLength(ND_EtFlowControl) - ValveLength(ND_EtFlowControl) + 2*ValveSocket(ND_EtFlowControl) - SocketDepth(ND_EtFlowControl);
    Z_EtFlowControl
], 2*SocketDepth(ND_EtFlowControl), [-90; 0; 0]*deg, ND_EtFlowControl, PS_Default)
L_EtFlowControlVert := Z_EtFlowControl - (Et_Origin[2] - T_PlantWall - ConRadius(ND_EtFlowControl)) - 2*ElbowRadius(ND_EtFlowControl) = 0.064 m
EtFlowControlVertPipe := PipeF([
    Et_Origin[0] - 2*S_Fitting - 2*ConRadius(ND_EtDrain) - ConRadius(ND_EtFlowControl);
    Et_Origin[1] - T_PlantWall - 2*MaleAdapterLength(ND_EtFlowControl) - ValveLength(ND_EtFlowControl) + 2*ValveSocket(ND_EtFlowControl) - SocketDepth(ND_EtFlowControl) - ElbowRadius(ND_EtFlowControl);
    Et_Origin[2] - T_PlantWall - ConRadius(ND_EtFlowControl) + ElbowRadius(ND_EtFlowControl)
], L_EtFlowControlVert, [0; 90; 0]*deg, ND_EtFlowControl, PS_Default)
L_EtFlowControlHoriz := max(T_PlantWall - CouplingLength(ND_EtFlowControl) + SocketDepth(ND_EtFlowControl), 0 m)
EtFlowControlHorizPipe1 := PipeSUBF([
    Et_Origin[0] - 2*S_Fitting - 2*ConRadius(ND_EtDrain) - ConRadius(ND_EtFlowControl);
    Et_Origin[1] - T_PlantWall + CouplingLength(ND_EtFlowControl) - SocketDepth(ND_EtFlowControl);
    Z_EtFlowControl
], L_EtFlowControlHoriz, [-90; 0; 0]*deg, ND_EtFlowControl, PS_Default, ["EtCon"])
EtFlowControlHorizPipe2 := PipeSUBF([
    Et_Origin[0] - 2*S_Fitting - 2*ConRadius(ND_EtDrain) - ConRadius(ND_EtFlowControl);
    Et_Origin[1] - T_PlantWall + CouplingLength(ND_EtFlowControl) - SocketDepth(ND_EtFlowControl);
    Et_Origin[2] - T_PlantWall - ConRadius(ND_EtFlowControl)
], L_EtFlowControlHoriz, [-90; 0; 0]*deg, ND_EtFlowControl, PS_Default, ["EtCon"])
L_EtFlowControlHoriz3 := 2*SocketDepth(ND_EtFlowControl) + 2*MaleAdapterLength(ND_EtFlowControl) + ValveLength(ND_EtFlowControl) - 2*ValveSocket(ND_EtFlowControl)
EtFlowControlHorizPipe3 := PipeF([
    Et_Origin[0] - 2*S_Fitting - 2*ConRadius(ND_EtDrain) - ConRadius(ND_EtFlowControl);
    Et_Origin[1] - T_PlantWall + SocketDepth(ND_EtFlowControl);
    Et_Origin[2] - T_PlantWall - ConRadius(ND_EtFlowControl)
], L_EtFlowControlHoriz3, [90; 0; 0]*deg, ND_EtFlowControl, PS_Default)
EtFlowControlFittingLayer := layer_new("EtFlowControlFittingPlu", green)
EtFlowControlCoupling1 := CouplingSUBF([
    Et_Origin[0] - 2*S_Fitting - 2*ConRadius(ND_EtDrain) - ConRadius(ND_EtFlowControl);
    Et_Origin[1] - T_PlantWall + SocketDepth(ND_EtFlowControl);
    Et_Origin[2] - T_PlantWall - ConRadius(ND_EtFlowControl)
], [-90; 0]*deg, ND_EtFlowControl, PS_Default, ["EtCon"])
EtFlowControlCoupling2 := CouplingSUBF([
    Et_Origin[0] - 2*S_Fitting - 2*ConRadius(ND_EtDrain) - ConRadius(ND_EtFlowControl);
    Et_Origin[1] - T_PlantWall + SocketDepth(ND_EtFlowControl);
    Z_EtFlowControl
], [-90; 0]*deg, ND_EtFlowControl, PS_Default, ["EtCon"])
EtFlowControlElbow1 := ElbowF([
    Et_Origin[0] - 2*S_Fitting - 2*ConRadius(ND_EtDrain) - ConRadius(ND_EtFlowControl);
    Et_Origin[1] - T_PlantWall - 2*MaleAdapterLength(ND_EtFlowControl) - ValveLength(ND_EtFlowControl) + 2*ValveSocket(ND_EtFlowControl) - SocketDepth(ND_EtFlowControl);
    Et_Origin[2] - T_PlantWall - ConRadius(ND_EtFlowControl)
], [0; -90; 180]*deg, ND_EtFlowControl, PS_Default)
EtFlowControlElbow2 := ElbowF([
    Et_Origin[0] - 2*S_Fitting - 2*ConRadius(ND_EtDrain) - ConRadius(ND_EtFlowControl);
    Et_Origin[1] - T_PlantWall - 2*MaleAdapterLength(ND_EtFlowControl) - ValveLength(ND_EtFlowControl) + 2*ValveSocket(ND_EtFlowControl) - SocketDepth(ND_EtFlowControl);
    Z_EtFlowControl
], [0; 90; 180]*deg, ND_EtFlowControl, PS_Default)
EtFlowControlAdapterLayer := layer_new("EtFlowControlAdapterPlu", blue3)
EtFlowControlAdapter1 := MaleAdapterF([
    Et_Origin[0] - 2*S_Fitting - 2*ConRadius(ND_EtDrain) - ConRadius(ND_EtFlowControl);
    Et_Origin[1] - T_PlantWall - SocketDepth(ND_EtFlowControl);
    Z_EtFlowControl
], [90; 0]*deg, ND_EtFlowControl, PS_Default)
EtFlowControlAdapter2 := MaleAdapterF([
    Et_Origin[0] - 2*S_Fitting - 2*ConRadius(ND_EtDrain) - ConRadius(ND_EtFlowControl);
    Et_Origin[1] - T_PlantWall - 2*MaleAdapterLength(ND_EtFlowControl) - ValveLength(ND_EtFlowControl) + 2*ValveSocket(ND_EtFlowControl) + SocketDepth(ND_EtFlowControl);
    Z_EtFlowControl
], [-90; 0]*deg, ND_EtFlowControl, PS_Default)
EtFlowControlValveLayer := layer_new("EtFlowControlValvePlu", blue2)
EtFlowControlValve := insertdwg("https://confluence.cornell.edu/download/attachments/173604905/Et-Scaled-Gate-Valve-Threaded.dwg", [
    Et_Origin[0] - 2*S_Fitting - 2*ConRadius(ND_EtDrain) - ConRadius(ND_EtFlowControl);
    Et_Origin[1] - T_PlantWall - MaleAdapterLength(ND_EtFlowControl) + ValveSocket(ND_EtFlowControl);
    Z_EtFlowControl
], 2*outerradius(ND_EtFlowControl)/(1.16 m), 2*outerradius(ND_EtFlowControl)/(1.16 m), 0 deg)
L_EtFlowControlHoriz ≤ SocketDepth(ND_EtFlowControl) = 0
RotateFlowControlValve := Rotate3DLast([
    Et_Origin[0] - 2*S_Fitting - 2*ConRadius(ND_EtDrain) - ConRadius(ND_EtFlowControl);
    Et_Origin[1] - T_PlantWall - MaleAdapterLength(ND_EtFlowControl) + ValveSocket(ND_EtFlowControl);
    Z_EtFlowControl
], "z", 90 deg)
FlowControlScript :=
    stack(EtFlowControlPipeLayer, EtFlowControlNipple1, EtFlowControlNipple2, EtFlowControlVertPipe, EtFlowControlHorizPipe3, FreezeLayer("EtFlowControlPipePlu"), EtFlowControlFittingLayer, EtFlowControlCoupling1, EtFlowControlCoupling2, EtFlowControlElbow1, EtFlowControlElbow2, FreezeLayer("EtFlowControlFittingPlu"), EtFlowControlAdapterLayer, EtFlowControlAdapter1, EtFlowControlAdapter2, FreezeLayer("EtFlowControlAdapterPlu"), EtFlowControlValveLayer, EtFlowControlValve, RotateFlowControlValve, FreezeLayer("EtFlowControlValvePlu")) if L_EtFlowControlHoriz ≤ SocketDepth(ND_EtFlowControl)
    stack(EtFlowControlPipeLayer, EtFlowControlNipple1, EtFlowControlNipple2, EtFlowControlVertPipe, EtFlowControlHorizPipe1, EtFlowControlHorizPipe2, EtFlowControlHorizPipe3, FreezeLayer("EtFlowControlPipePlu"), EtFlowControlFittingLayer, EtFlowControlCoupling1, EtFlowControlCoupling2, EtFlowControlElbow1, EtFlowControlElbow2, FreezeLayer("EtFlowControlFittingPlu"), EtFlowControlAdapterLayer, EtFlowControlAdapter1, EtFlowControlAdapter2, FreezeLayer("EtFlowControlAdapterPlu"), EtFlowControlValveLayer, EtFlowControlValve, RotateFlowControlValve, FreezeLayer("EtFlowControlValvePlu")) otherwise
# Inlet Pipe
EtInletPipeLayer := layer_new("EtInletPipePlu", blue)
EtInletFittingLayer := layer_new("EtInletFittingPlu", green)
EtInletElbow := ElbowF(Et_Origin + [-L_Et; W_Et/2; H_Et + ConRadius(ND_EtInlet)], [-90; 0; -90]*deg, ND_EtInlet, PS_Default)
L_EtInletPipe := .5 m
EtInletPipe := PipeF(Et_Origin + [-L_Et; W_Et/2; H_Et + ConRadius(ND_EtInlet)], L_EtInletPipe, [0; 0; 0]*deg, ND_EtInlet, PS_Default)
FreezeEtInletPipe := FreezeLayer("EtInletPipePlu")
FreezeEtInletFittings := FreezeLayer("EtInletFittingPlu")
EtInletScript := stack(EtInletFittingLayer, EtInletElbow, FreezeEtInletFittings, EtInletPipeLayer, EtInletPipe, FreezeEtInletPipe)
# Add Water Levels
EtWaterLayer := layer_new("EtWater", blue2)
EtWater := BoxF(Et_Origin, [Et_Origin[0] - L_Et; Et_Origin[1] + W_Et; ZW_Et], [0; 0; 0]*deg)
EtRMPipeWater := CylinderF(RMElbow_Origin + [0; ElbowRadius(ND_RMPipe); ElbowRadius(ND_RMPipe)], innerdiameter(ND_RMPipe, PS_Default)/2, ZW_RMPipe - RMElbow_Origin[2] - ElbowRadius(ND_RMPipe), [0; 90]*deg)
EtWaterFrz := FreezeLayer("EtWater")
EtWaterScript := stack(EtWaterLayer, EtWater, EtRMPipeWater, EtWaterFrz)
AC_EntranceTank := stack(EtTankScript, EtTrashRackScript, EtDrains, RMScript, EtInletScript)
AC_EntranceTankWater := stack(EtTankScript, EtTrashRackScript, EtDrains, RMScript, EtInletScript, EtWaterScript)
AC_EntranceTank :=
    AC_EntranceTank if EN_Water == 0
    AC_EntranceTankWater otherwise
# [component: inputs stack(FlocTankDrainCouplingScript, FlocTankDrainPipeScript, FlocTankDrainAdapterScript, FlocTankDrainValveScript, AC_EntranceTank)]
