# [reference: BasicInputs.xmcd]
# Entrance Tank AutoCAD
# Entrance Tank Concrete
Et_Origin := [
    Plant_Origin[0];
    Floc_Origin[1] + (N_FlocChannels*(W_FlocChannel + T_PlantWall)) + W_EtWalkway + T_PlantWall;
    Z_Et
] = [0; 11.2608; 1.6535] m
Et_Dim := [L_Et; W_Et; H_Et] = [6.22193; 0.786575; 1.05976] m
EtHopper_Origin := [
    Et_Origin[0] - S_Fitting - ConRadius(ND_EtDrain) - L_EtHopper/2 - T_EtHopperLedge;
    Et_Origin[1] + W_Et;
    Et_Origin[2]
] = [-1.06096; 12.0474; 1.6535] m
Hopper_FarCorner := [Et_Origin[0] - L_EtHopper - T_EtHopperLedge; Et_Origin[1]; Z_EtHopper] = [-1.77032; 11.2608; 2.41326] m
HopperBack_FarCorner := [
    Et_Origin[0] - W_Et + 2*(S_Fitting + ConRadius(ND_EtDrain));
    Et_Origin[1] + L_Et + W_Et;
    Et_Origin[2] + H_EtHopperBack
] = [-0.584975; 18.2693; 2.23848] m
EntTankLayer := layer_new("EtTankCon", grey)
EntTank := Tank(Et_Origin, Et_Dim, T_PlantWall)
UnionEntTankPieces := Union_All
FreezeEntTank := FreezeLayer("EtTankCon")
HopperLayer := layer_new("EtHopperCon", grey)
EtHopper := WedgeF(EtHopper_Origin, Hopper_FarCorner, [0; 0; 0]*deg)
MirrorEtHopper := MirrorLast([EtHopper_Origin[0] + T_EtHopperLedge/2; EtHopper_Origin[1]], [EtHopper_Origin[0] + T_EtHopperLedge/2; EtHopper_Origin[1] + zc], "n")
ArrayEtHopper := array_all(1, N_EtFullHopper, -L_EtHopper - T_EtHopperLedge)
EtHopperLedge := BoxF(EtHopper_Origin, EtHopper_Origin + [T_EtHopperLedge; -W_Et; H_EtHopper], [0; 0; 0]*deg)
ArrayEtHopperLedge := array_all(1, N_EtFullHopper, -L_EtHopper - T_EtHopperLedge)
EtHopperBack := WedgeF(Et_Origin + [0; W_Et; 0], HopperBack_FarCorner, [90; 0; 0]*deg)
H_EtLastSlope := H_EtHopper - 20 cm
LastEtHopper := WedgeF([Et_Origin[0] - L_Et; Et_Origin[1] + W_Et; Et_Origin[2]], [
    Et_Origin[0] - L_Et + L_EtHopper/2 - S_Fitting - ConRadius(ND_EtDrain);
    Et_Origin[1];
    Et_Origin[2] + H_EtLastSlope
], [0; 0; 0]*deg)
FreezeHopper := FreezeLayer("EtHopperCon")
TrashRackSlot1 := BoxF(EtHopper_Origin + [T_EtHopperLedge/2 - T_ConcreteMin/2; 2*D_Rebar; H_EtHopper - 2*D_Rebar], EtHopper_Origin + [
    T_EtHopperLedge/2 - T_ConcreteMin/2 - 2*D_Rebar;
    -W_Et - 2*D_Rebar;
    H_EtHopper + H_EtTop + H_PlantFreeboard + zc
], [0; 0; 0]*deg)
TrashRackSlot2 := BoxF(EtHopper_Origin + [T_EtHopperLedge/2 + T_ConcreteMin/2; 2*D_Rebar; H_EtHopper - 2*D_Rebar], EtHopper_Origin + [
    T_EtHopperLedge/2 + T_ConcreteMin/2 + 2*D_Rebar;
    -W_Et - 2*D_Rebar;
    H_EtHopper + H_EtTop + H_PlantFreeboard + zc
], [0; 0; 0]*deg)
GroupSlots := GroupAll("DeleteMe")
SubtractSlots := SubtractF(["EtTankCon"; "EtHopperCon"], "DeleteMe")
EtTankScript := stack(EntTankLayer, EntTank, FreezeEntTank, HopperLayer, EtHopper, MirrorEtHopper, EtHopperLedge, ArrayEtHopper, EtHopperBack, LastEtHopper, FreezeHopper, TrashRackSlot1, TrashRackSlot2, GroupSlots, SubtractSlots)
# Trash Rack
TRLayer := layer_new("EtTrashrack", yellow)
HorizCylinder := CylinderF(EtHopper_Origin + [T_EtHopperLedge/2 - T_ConcreteMin/2 - D_Rebar/2; 2*D_Rebar; H_EtHopper - 3/2*D_Rebar], D_Rebar/2, W_Et + 4*D_Rebar, [90; 0]*deg)
ViewRight := view("r")
ArrayHorizCylinder := ArrayLast(N_TRSpacesH + 1, 1, B_EtRebar)
ViewTop := view("t")
VertCylinder := CylinderF(EtHopper_Origin + [T_EtHopperLedge/2 - T_ConcreteMin/2 - 3*D_Rebar/2; 3/2*D_Rebar; H_EtHopper - 2*D_Rebar], D_Rebar/2, (N_TRSpacesH + 1)*B_EtRebar - D_Rebar, [0; 90]*deg)
ArrayVertCyl := ArrayLast(1, N_TRSpacesV + 1, -B_EtRebar)
ArrayAll := array_all(1, 2, T_ConcreteMin + 2*D_Rebar)
Freeze := FreezeLayer("EtTrashrack")
EtTrashRackScript := stack(TRLayer, HorizCylinder, ViewRight, ArrayHorizCylinder, ViewTop, VertCylinder, ViewRight, ArrayVertCyl, ViewTop, ArrayAll, Freeze)
# Rapid Mix Pipe and LFOM
# this is the upper elbow (connected to the LFOM)
RMElbow_Origin := [
    Plant_Origin[0] - L_Sed + S_Fitting + ConRadius(ND_RMPipe);
    Et_Origin[1] + W_Et - S_Fitting - ConRadius(ND_RMPipe) - ElbowRadius(ND_RMPipe);
    FlocCoupling_Origin[2]
]
EtRMCoupling_Origin := RMElbow1_Origin - [0 m; 2*SocketDepth(ND_RMPipe); 0 m]
RMTee_Origin :=
    if CouplingLength(ND_RMPipe) < T_PlantWall
        [
            Plant_Origin[0] - L_Sed + ConRadius(ND_RMPipe) + S_Fitting;
            -T_PlantWall + EtRMCoupling_Origin[1];
            EtRMCoupling_Origin[2]
        ]
    otherwise
        [
            Plant_Origin[0] - L_Sed + ConRadius(ND_RMPipe) + S_Fitting;
            -CouplingLength(ND_RMPipe) + EtRMCoupling_Origin[1];
            EtRMCoupling_Origin[2]
        ]
RMElbow2_Origin := [
    RMTee_Origin[0];
    RMTee_Origin[1] - ShortTeeLength(ND_RMPipe) - ElbowRadius(ND_RMPipe);
    FlocCoupling_Origin[2]
]  # this is the lower elbow
L_RMPipeHorizLower := RMTee_Origin[1] - Floc_Origin[1] - N_FlocChannels*W_FlocChannel - ElbowRadius(ND_RMPipe) - ShortTeeLength(ND_RMPipe) - (T_PlantWall*(N_FlocChannels - 1) - CouplingLength(ND_RMPipe) + SocketDepth(ND_RMPipe))
L_RMPipeVertLower := Z_EtExit - ShortTeeLength(ND_RMPipe) - FlocCoupling_Origin[2] - ElbowRadius(ND_RMPipe)
L_RMPipeVert := RMElbow1_Origin[2] - ShortTeeLength(ND_RMPipe) - FlocCoupling_Origin[2] - ElbowRadius(ND_RMPipe)
L_RMFlocPipe := RMElbow2_Origin[1] - FlocCoupling_Origin[1] - CouplingLength(ND_RMPipe) + SocketDepth(ND_RMPipe)
L_RMExitPipe := 2*SocketDepth(ND_RMPipe)
L_RMExitPipe2 :=
    (2*SocketDepth(ND_RMPipe)) if (CouplingLength(ND_RMPipe) > T_PlantWall)
    (T_PlantWall - CouplingLength(ND_RMPipe) + 2*SocketDepth(ND_RMPipe)) otherwise
L_RMTeePipe := ZW_RMPipe + H_PlantFreeboard - Z_EtExit - ShortTeeLength(ND_RMPipe)
L_LfomPipe := Z_EtTop - Z_EtExit - ElbowRadius(ND_RMPipe)
ElbowLayer := layer_new("EtRmElbowPlu", green)
UpperElbow := ElbowSUBF(RMElbow1_Origin, [0; 90; 0]*deg, ND_RMPipe, PS_Default, ["EtTankCon"; "EtHopperCon"])
LowerElbow := ElbowF(RMElbow2_Origin, [0; 90; 0]*deg, ND_RMPipe, PS_Default)
FreezeElbow := FreezeLayer("EtRmElbowPlu")
RMCouplingLayer := layer_new("EtRmCouplingPlu", green)
ExitCoupling := CouplingSUBF(EtRMCoupling_Origin, [90; 0]*deg, ND_RMPipe, PS_Default, ["EtTankCon"; "EtHopperCon"])
FreezeRMEtCoupling := FreezeLayer("EtRmCouplingPlu")
PipeLayer := layer_new("EtRmPipePlu", blue)
ExitPipe := PipeSUBF(RMElbow1_Origin, L_RMExitPipe, [90; 0; 0]*deg, ND_RMPipe, PS_Default, ["EtTankCon"; "EtHopperCon"])
ExitPipe2 := PipeF(EtRMCoupling_Origin - [0 m; CouplingLength(ND_RMPipe) - 2*SocketDepth(ND_RMPipe); 0 m], L_RMExitPipe2, [90; 0; 0]*deg, ND_RMPipe, PS_Default)
RMPipeVert := PipeF(RMTee_Origin - [0 m; ShortTeeLength(ND_RMPipe); ShortTeeLength(ND_RMPipe)], L_RMPipeVert, [0; 270; 0]*deg, ND_RMPipe, PS_Default)
RMFlocPipe := PipeF(RMElbow2_Origin, L_RMFlocPipe, [90; 0; 0]*deg, ND_RMPipe, PS_Default)
RMTeePipe := PipeF(RMTee_Origin + [0 m; -ShortTeeLength(ND_RMPipe); ShortTeeLength(ND_RMPipe)], L_RMTeePipe, [0; 90; 0]*deg, ND_RMPipe, PS_Default)
FreezePipe := FreezeLayer("EtRmPipePlu")
RMTeeLayer := layer_new("EtRmTeePlu", green)
MakeTee := TeeF(RMTee_Origin, [0; 90; 0]*deg, ND_RMPipe, PS_Default)
FreezeTee := FreezeLayer("EtRmTeePlu")
RMScript := stack(ElbowLayer, UpperElbow, LowerElbow, FreezeElbow, RMCouplingLayer, ExitCoupling, FreezeRMEtCoupling, PipeLayer, ExitPipe, ExitPipe2, RMPipeVert, RMFlocPipe, RMTeePipe, FreezePipe, RMTeeLayer, MakeTee, FreezeTee)
LfomLayer := layer_new("EtLfomPlu", blue)
LfomPipe := PipeF(RMElbow1_Origin + [0 m; ElbowRadius(ND_RMPipe); ElbowRadius(ND_RMPipe)], L_LfomPipe, [0; 90; 0]*deg, ND_RMPipe, PS_Default)
FreezePipe := FreezeLayer("EtLfomPlu")
LfomOrifices :=
    Local ← stack(LfomLayer, LfomPipe, FreezePipe)
    for h ∈ 0 .. last(H_LfomOrifice)
        Local ← stack(Local, CylinderF([
            RMElbow1_Origin[0];
            RMElbow1_Origin[1] + ElbowRadius(ND_RMPipe);
            ZW_Et - HL_Flowmeasure + H_LfomOrifice[h]
        ], D_LfomOrifices/2, outerradius(ND_RMPipe) + zc, [2*asin(D_LfomOrifices/(2*outerradius(ND_RMPipe)))*(mod(h, 2) == 1) + 90 deg; 0]))
        Local ← stack(Local, ArrayLastPolar([
            RMElbow1_Origin[0];
            RMElbow1_Origin[1] + ElbowRadius(ND_RMPipe);
            ZW_Et - HL_Flowmeasure + H_LfomOrifice[h]
        ], N_LfomOrifices[h], (2*N_LfomOrifices[h] - 1)*2*asin(D_LfomOrifices/(2*outerradius(ND_RMPipe)))))
    return Local
GroupOrifices := GroupAll("DeleteMe")
SubtractOrifices := SubtractF(["EtLfomPlu"], "DeleteMe")
EtLfomScript := stack(LfomOrifices, GroupOrifices, SubtractOrifices)
# Hopper Drains
DrainCouplingLayer := layer_new("EtDrainCouplingsPlu", green)
DrainWeirCoupling := CouplingSUBF([-S_Fitting - ConRadius(ND_EtDrain); ConRadius(ND_EtDrain) + S_Fitting; -SocketDepth(ND_EtDrain)] + Et_Origin, [0; 270]*deg, ND_EtDrain, PS_Default, ["EtTankCon"])
DrainCouplings :=
    Local ← stack(DrainCouplingLayer, DrainWeirCoupling)
    for i ∈ 0 .. N_EtFullHopper
        Local ← stack(Local, CouplingSUBF([
            -(L_EtHopper + T_EtHopperLedge)*i - S_Fitting - ConRadius(ND_EtDrain);
            ConRadius(ND_EtDrain) + S_Fitting;
            -SocketDepth(ND_EtDrain)
        ] + Et_Origin, [0; 270]*deg, ND_EtDrain, PS_Default, ["EtTankCon"]))
FreezeDrainCouplings := FreezeLayer("EtDrainCouplingsPlu")
DrainPipeLayer := layer_new("EtDrainPipesPlu", blue)
DrainPipes :=
    Local ← stack(FreezeDrainCouplings, DrainPipeLayer)
    for i ∈ 0 .. N_EtFullHopper
        Local ← stack(Local, PipeSUBF([
            -(L_EtHopper + T_EtHopperLedge)*i - S_Fitting - ConRadius(ND_EtDrain);
            ConRadius(ND_EtDrain) + S_Fitting;
            SocketDepth(ND_EtDrain) - CouplingLength(ND_EtDrain)
        ] + Et_Origin, T_PlantWall, [0; 270; 0]*deg, ND_EtDrain, PS_Default, ["EtTankCon"]))
FreezePipes := FreezeLayer("EtDrainPipesPlu")
StopperLayer := layer_new("EtDrainStoppersPlu", blue)
FirstStopper := PipeF([-S_Fitting - ConRadius(ND_EtDrain); ConRadius(ND_EtDrain) + S_Fitting; -SocketDepth(ND_EtDrain)] + Et_Origin, H_Et - H_PlantFreeboard/2 + SocketDepth(ND_EtDrain), [0; 90; 0]*deg, ND_EtDrain, PS_Default)
StopperPipes :=
    Local ← stack(FreezePipes, StopperLayer)
    for i ∈ 0 .. N_EtFullHopper
        Local ← stack(Local, PipeF([
            -(L_EtHopper + T_EtHopperLedge)*i - S_Fitting - ConRadius(ND_EtDrain);
            ConRadius(ND_EtDrain) + S_Fitting;
            -SocketDepth(ND_EtDrain)
        ] + Et_Origin, H_Et - H_PlantFreeboard/2 + SocketDepth(ND_EtDrain), [0; 90; 0]*deg, ND_EtDrain, PS_Default))
FreezeStopper := FreezeLayer("EtDrainStoppersPlu")
EtDrainsRight := stack(DrainCouplings, DrainPipes, StopperPipes, FreezeStopper)
ThawDrains := ThawMultiple(["EtTankCon"; "EtHopperCon"; "EtDrainCouplingsPlu"; "EtDrainPipesPlu"; "EtWeir"; "EtTrashrack"; "Cdc"; "CdcFittings"; "EtDrainStoppersPlu"])
MirrorDrains := Mirror3dAll("YZ", [Plant_Origin[0] - 1/2*L_Sed; 0 m; 0 m], "Y")
FreezeDrains := FreezeMultiple(["EtTankCon"; "EtHopperCon"; "EtDrainCouplingsPlu"; "EtDrainPipesPlu"; "EtWeir"; "EtTrashrack"; "Cdc"; "CdcFittings"; "EtDrainStoppersPlu"])
EtDrainsLeft := stack(ThawDrains, MirrorDrains, FreezeDrains)
# Overflow Drain Plu
# The half of the PVC overflow channel closer to the right-hand end of the tank (from top view):
EtChannelPipe1 := PipeF(Et_Origin + [
    -CapThickness(ND_EtOverflowDrain);
    2*S_Fitting + 2*ConRadius(ND_EtDrain) + ConRadius(ND_EtOverflowDrain);
    H_EtHopper + HL_Flowmeasure - innerdiameter(ND_EtOverflowDrain, PS_Default)/2 + H_EtOverflowCutaway + H_EtLFOMtoOverflow
], L_EtChannelPipes, [0; 0; 0]*deg, ND_EtOverflowDrain, PS_Default)
TeeLength(ND_EtOverflowDrain) =  # error: This variable is undefined.
# The half of the PVC overflow channel closer to the trash rack:
ShortTeeLength(ND_EtOverflowDrain) =  # error
EtChannelPipe2 := PipeF(Et_Origin + [
    -CapThickness(ND_EtOverflowDrain) - L_EtChannelPipes - TeeLength(ND_EtOverflowDrain);
    2*S_Fitting + 2*ConRadius(ND_EtDrain) + ConRadius(ND_EtOverflowDrain);
    H_EtHopper + HL_Flowmeasure - innerdiameter(ND_EtOverflowDrain, PS_Default)/2 + H_EtOverflowCutaway + H_EtLFOMtoOverflow
], L_EtChannelPipes, [0; 0; 0]*deg, ND_EtOverflowDrain, PS_Default)
EtOverflowTee := TeeF(Et_Origin + [
    -CapThickness(ND_EtOverflowDrain) - L_EtChannelPipes - TeeLength(ND_EtOverflowDrain)/2;
    2*S_Fitting + 2*ConRadius(ND_EtDrain) + ConRadius(ND_EtOverflowDrain);
    H_EtHopper + HL_Flowmeasure - innerdiameter(ND_EtOverflowDrain, PS_Default)/2 + H_EtOverflowCutaway + H_EtLFOMtoOverflow - ShortTeeLength(ND_EtOverflowDrain)
], [0; 0; -90]*deg, ND_EtOverflowDrain, PS_Default)
EtOverflowCap1 := CapF(Et_Origin + [
    -CapThickness(ND_EtOverflowDrain);
    2*S_Fitting + 2*ConRadius(ND_EtDrain) + ConRadius(ND_EtOverflowDrain);
    H_EtHopper + HL_Flowmeasure - innerdiameter(ND_EtOverflowDrain, PS_Default)/2 + H_EtOverflowCutaway + H_EtLFOMtoOverflow
], [0; 0; 0]*deg, ND_EtOverflowDrain)
EtOverflowCap2 := CapF(Et_Origin + [
    -CapThickness(ND_EtOverflowDrain) - 2*L_EtChannelPipes - TeeLength(ND_EtOverflowDrain);
    2*S_Fitting + 2*ConRadius(ND_EtDrain) + ConRadius(ND_EtOverflowDrain);
    H_EtHopper + HL_Flowmeasure - innerdiameter(ND_EtOverflowDrain, PS_Default)/2 + H_EtOverflowCutaway + H_EtLFOMtoOverflow
], [0; 180; 0]*deg, ND_EtOverflowDrain)
L_EtOverflowPipeVert := H_EtHopper + HL_Flowmeasure - innerdiameter(ND_EtOverflowDrain, PS_Default)/2 + H_EtOverflowCutaway + H_EtLFOMtoOverflow - ShortTeeLength(ND_EtOverflowDrain) + T_PlantWall
EtOverflowPipeVert := PipeSUBF(Et_Origin + [
    -CapThickness(ND_EtOverflowDrain) - L_EtChannelPipes - TeeLength(ND_EtOverflowDrain)/2;
    2*S_Fitting + 2*ConRadius(ND_EtDrain) + ConRadius(ND_EtOverflowDrain);
    H_EtHopper + HL_Flowmeasure - innerdiameter(ND_EtOverflowDrain, PS_Default)/2 + H_EtOverflowCutaway + H_EtLFOMtoOverflow - ShortTeeLength(ND_EtOverflowDrain)
], L_EtOverflowPipeVert, [0; -90; 0]*deg, ND_EtOverflowDrain, PS_Default, ["EtTankCon"])
EtOverflowWeirSlot := BoxF(Et_Origin + [
    -CapThickness(ND_EtOverflowDrain);
    2*S_Fitting + 2*ConRadius(ND_EtDrain) + ConRadius(ND_EtOverflowDrain) - W_EtOverflowSlot/2;
    H_EtHopper + HL_Flowmeasure + H_EtLFOMtoOverflow - zc
], Et_Origin + [
    -CapThickness(ND_EtOverflowDrain) - L_EtOverflowWeir/2;
    2*S_Fitting + 2*ConRadius(ND_EtDrain) + ConRadius(ND_EtOverflowDrain) + W_EtOverflowSlot/2;
    H_EtHopper + HL_Flowmeasure + H_EtOverflowCutaway + H_EtLFOMtoOverflow + CapThickness(ND_EtOverflowDrain) + zc
], [0; 0; 0]*deg)
GroupAll("DeleteMe") =  # error
EtOverflowFittingLayer := layer_new("EtOverflowFittingPlu", green)
FreezeEtOverflowFittings := FreezeLayer("EtOverflowFittingPlu")
EtOverflowPipeLayer := layer_new("EtOverflowPipePlu", blue)
FreezeEtOverflowPipe := FreezeLayer("EtOverflowPipePlu")
SubtractSlotFromFittings := SubtractF(["EtOverflowFittingPlu"], "DeleteMe")
SubtractSlotFromPipes := SubtractF(["EtOverflowPipePlu"], "DeleteMe")
EtOverflowPluScript := stack(EtOverflowFittingLayer, EtOverflowTee, EtOverflowCap1, EtOverflowCap2, FreezeEtOverflowFittings, EtOverflowPipeLayer, EtOverflowPipeVert, EtChannelPipe1, EtChannelPipe2, FreezeEtOverflowPipe, EtOverflowWeirSlot, GroupAll("DeleteMe"), SubtractSlotFromFittings, EtOverflowWeirSlot, GroupAll("DeleteMe"), SubtractSlotFromPipes)
# Flow Control Drain
Z_EtFlowControl := max(Z_Walkway + ConRadius(ND_EtFlowControl), Et_Origin[2] - T_PlantWall - ConRadius(ND_EtFlowControl) + 2*ElbowRadius(ND_EtFlowControl) + 2*SocketDepth(ND_EtFlowControl))
EtFlowControlPipeLayer := layer_new("EtFlowControlPipePlu", blue)
EtFlowControlNipple1 := PipeF([
    Et_Origin[0] - 2*S_Fitting - 2*ConRadius(ND_EtDrain) - ConRadius(ND_EtFlowControl);
    Et_Origin[1] - T_PlantWall + SocketDepth(ND_EtFlowControl);
    Z_EtFlowControl
], 2*SocketDepth(ND_EtFlowControl), [90; 0; 0]*deg, ND_EtFlowControl, PS_Default)
EtFlowControlNipple2 := PipeF([
    Et_Origin[0] - 2*S_Fitting - 2*ConRadius(ND_EtDrain) - ConRadius(ND_EtFlowControl);
    Et_Origin[1] - T_PlantWall - 2*MaleAdapterLength(ND_EtFlowControl) - ValveLength(ND_EtFlowControl) + 2*ValveSocket(ND_EtFlowControl) - SocketDepth(ND_EtFlowControl);
    Z_EtFlowControl
], 2*SocketDepth(ND_EtFlowControl), [-90; 0; 0]*deg, ND_EtFlowControl, PS_Default)
L_EtFlowControlVert := Z_EtFlowControl - (Et_Origin[2] - T_PlantWall - ConRadius(ND_EtFlowControl)) - 2*ElbowRadius(ND_EtFlowControl)
EtFlowControlVertPipe := PipeF([
    Et_Origin[0] - 2*S_Fitting - 2*ConRadius(ND_EtDrain) - ConRadius(ND_EtFlowControl);
    Et_Origin[1] - T_PlantWall - 2*MaleAdapterLength(ND_EtFlowControl) - ValveLength(ND_EtFlowControl) + 2*ValveSocket(ND_EtFlowControl) - SocketDepth(ND_EtFlowControl) - ElbowRadius(ND_EtFlowControl);
    Et_Origin[2] - T_PlantWall - ConRadius(ND_EtFlowControl) + ElbowRadius(ND_EtFlowControl)
], L_EtFlowControlVert, [0; 90; 0]*deg, ND_EtFlowControl, PS_Default)
L_EtFlowControlHoriz := max(T_PlantWall - CouplingLength(ND_EtFlowControl) + SocketDepth(ND_EtFlowControl), 0 m)
EtFlowControlHorizPipe1 := PipeSUBF([
    Et_Origin[0] - 2*S_Fitting - 2*ConRadius(ND_EtDrain) - ConRadius(ND_EtFlowControl);
    Et_Origin[1] - T_PlantWall + CouplingLength(ND_EtFlowControl) - SocketDepth(ND_EtFlowControl);
    Z_EtFlowControl
], L_EtFlowControlHoriz, [-90; 0; 0]*deg, ND_EtFlowControl, PS_Default, ["EtTankCon"])
EtFlowControlHorizPipe2 := PipeSUBF([
    Et_Origin[0] - 2*S_Fitting - 2*ConRadius(ND_EtDrain) - ConRadius(ND_EtFlowControl);
    Et_Origin[1] - T_PlantWall + CouplingLength(ND_EtFlowControl) - SocketDepth(ND_EtFlowControl);
    Et_Origin[2] - T_PlantWall - ConRadius(ND_EtFlowControl)
], L_EtFlowControlHoriz, [-90; 0; 0]*deg, ND_EtFlowControl, PS_Default, ["EtDrainChannelCon"])
EtFlowControlHorizPipe3 := PipeF([
    Et_Origin[0] - 2*S_Fitting - 2*ConRadius(ND_EtDrain) - ConRadius(ND_EtFlowControl);
    Et_Origin[1] - T_PlantWall + SocketDepth(ND_EtFlowControl);
    Et_Origin[2] - T_PlantWall - ConRadius(ND_EtFlowControl)
], 2*SocketDepth(ND_EtFlowControl) + 2*MaleAdapterLength(ND_EtFlowControl) + ValveLength(ND_EtFlowControl) - 2*ValveSocket(ND_EtFlowControl), [90; 0; 0]*deg, ND_EtFlowControl, PS_Default)
EtFlowControlFittingLayer := layer_new("EtFlowControlFittingPlu", green)
EtFlowControlCoupling1 := CouplingSUBF([
    Et_Origin[0] - 2*S_Fitting - 2*ConRadius(ND_EtDrain) - ConRadius(ND_EtFlowControl);
    Et_Origin[1] - T_PlantWall + SocketDepth(ND_EtFlowControl);
    Et_Origin[2] - T_PlantWall - ConRadius(ND_EtFlowControl)
], [-90; 0]*deg, ND_EtFlowControl, PS_Default, ["EtDrainChannelCon"])
EtFlowControlCoupling2 := CouplingSUBF([
    Et_Origin[0] - 2*S_Fitting - 2*ConRadius(ND_EtDrain) - ConRadius(ND_EtFlowControl);
    Et_Origin[1] - T_PlantWall + SocketDepth(ND_EtFlowControl);
    Z_EtFlowControl
], [-90; 0]*deg, ND_EtFlowControl, PS_Default, ["EtTankCon"])
EtFlowControlElbow1 := ElbowF([
    Et_Origin[0] - 2*S_Fitting - 2*ConRadius(ND_EtDrain) - ConRadius(ND_EtFlowControl);
    Et_Origin[1] - T_PlantWall - 2*MaleAdapterLength(ND_EtFlowControl) - ValveLength(ND_EtFlowControl) + 2*ValveSocket(ND_EtFlowControl) - SocketDepth(ND_EtFlowControl);
    Et_Origin[2] - T_PlantWall - ConRadius(ND_EtFlowControl)
], [0; -90; 180]*deg, ND_EtFlowControl, PS_Default)
EtFlowControlElbow2 := ElbowF([
    Et_Origin[0] - 2*S_Fitting - 2*ConRadius(ND_EtDrain) - ConRadius(ND_EtFlowControl);
    Et_Origin[1] - T_PlantWall - 2*MaleAdapterLength(ND_EtFlowControl) - ValveLength(ND_EtFlowControl) + 2*ValveSocket(ND_EtFlowControl) - SocketDepth(ND_EtFlowControl);
    Z_EtFlowControl
], [0; 90; 180]*deg, ND_EtFlowControl, PS_Default)
EtFlowControlAdapterLayer := layer_new("EtFlowControlAdapterPlu", red)
EtFlowControlAdapter1 := MaleAdapterF([
    Et_Origin[0] - 2*S_Fitting - 2*ConRadius(ND_EtDrain) - ConRadius(ND_EtFlowControl);
    Et_Origin[1] - T_PlantWall - SocketDepth(ND_EtFlowControl);
    Z_EtFlowControl
], [90; 0]*deg, ND_EtFlowControl, PS_Default)
EtFlowControlAdapter2 := MaleAdapterF([
    Et_Origin[0] - 2*S_Fitting - 2*ConRadius(ND_EtDrain) - ConRadius(ND_EtFlowControl);
    Et_Origin[1] - T_PlantWall - 2*MaleAdapterLength(ND_EtFlowControl) - ValveLength(ND_EtFlowControl) + 2*ValveSocket(ND_EtFlowControl) + SocketDepth(ND_EtFlowControl);
    Z_EtFlowControl
], [-90; 0]*deg, ND_EtFlowControl, PS_Default)
EtFlowControlValveLayer := layer_new("EtFlowControlValvePlu", blue3)
EtFlowControlValve := insertdwg("VAL-Scaled-Gate-Valve-Threaded", [
    Et_Origin[0] - 2*S_Fitting - 2*ConRadius(ND_EtDrain) - ConRadius(ND_EtFlowControl);
    Et_Origin[1] - T_PlantWall - MaleAdapterLength(ND_EtFlowControl) + ValveSocket(ND_EtFlowControl);
    Z_EtFlowControl
], 2*outerradius(ND_EtFlowControl)/(1.16 m), 2*outerradius(ND_EtFlowControl)/(1.16 m), 0 deg)
RotateFlowControlValve := Rotate3DLast([
    Et_Origin[0] - 2*S_Fitting - 2*ConRadius(ND_EtDrain) - ConRadius(ND_EtFlowControl);
    Et_Origin[1] - T_PlantWall - MaleAdapterLength(ND_EtFlowControl) + ValveSocket(ND_EtFlowControl);
    Z_EtFlowControl
], "z", 90 deg)
FlowControlScript :=
    stack(EtFlowControlPipeLayer, EtFlowControlNipple1, EtFlowControlNipple2, EtFlowControlVertPipe, EtFlowControlHorizPipe3, FreezeLayer("EtFlowControlPipePlu"), EtFlowControlFittingLayer, EtFlowControlCoupling1, EtFlowControlCoupling2, EtFlowControlElbow1, EtFlowControlElbow2, FreezeLayer("EtFlowControlFittingPlu"), EtFlowControlAdapterLayer, EtFlowControlAdapter1, EtFlowControlAdapter2, FreezeLayer("EtFlowControlAdapterPlu"), EtFlowControlValveLayer, EtFlowControlValve, RotateFlowControlValve, FreezeLayer("EtFlowControlValvePlu")) if L_EtFlowControlHoriz ≤ SocketDepth(ND_EtFlowControl)
    stack(EtFlowControlPipeLayer, EtFlowControlNipple1, EtFlowControlNipple2, EtFlowControlVertPipe, EtFlowControlHorizPipe1, EtFlowControlHorizPipe2, EtFlowControlHorizPipe3, FreezeLayer("EtFlowControlPipePlu"), EtFlowControlFittingLayer, EtFlowControlCoupling1, EtFlowControlCoupling2, EtFlowControlElbow1, EtFlowControlElbow2, FreezeLayer("EtFlowControlFittingPlu"), EtFlowControlAdapterLayer, EtFlowControlAdapter1, EtFlowControlAdapter2, FreezeLayer("EtFlowControlAdapterPlu"), EtFlowControlValveLayer, EtFlowControlValve, RotateFlowControlValve, FreezeLayer("EtFlowControlValvePlu")) otherwise
AC_EntranceTank := stack(EtTankScript, EtTrashRackScript, EtOverflowPluScript, EtDrainsRight, EtLfomScript, RMScript, FlowControlScript)
