T_EtRemovableWall := 5 cm
H_EtRemovableWallSupport := 4 cm
EN_TwoInlets := 1
Q := 4*L/s
T_EtRemovableWallSupport := 5 cm  # Created our own Expert Inputs
# [reference: ExpertInputs.xmcd]
# [reference: MathFunctions.xmcd]
# [reference: PipeDatabase.xmcd]
# [reference: MaterialsDatabase.xmcd]
# [reference: FluidsFunctions.xmcd]
# [reference: CdcFunctions.xmcd]
# [reference: SedimentationTank.xmcd]
# [reference: Flocculator.xmcd]
# [reference: LFOM.xmcd]
# [reference: EntranceTankajb347.xmcd]
# [reference: StackedRapidSandFilter.xmcd]
# [reference: LinearCdc.xmcd]
# [reference: ChemStorageTanks.xmcd]
# [reference: MtoATranslators.xmcd]
# [reference: MtoATranslatorsWrapped.xmcd]
# [reference: ChannelF.xmcd]
# [reference: PlumbingF.xmcd]
# [reference: TankF.xmcd]
# [reference: StairsF.xmcd]
# [reference: DrainChannelF.xmcd]
# [reference: FlocculatorAC.xmcd]
# [reference: SedimentationTankAC.xmcd]
# Entrance Tank AutoCAD
# Entrance Tank Concrete
# Origins and dimensions
Et_Origin0 := [
    Plant_Origin[0] - L_Sed + L_Et;
    Floc_Origin[1] + {
        (N_FlocChannels*(W_FlocChannel + T_FlocChannelWall)) + W_EtWalkway + 2*T_PlantWall - T_FlocChannelWall if Q_Plant > Q_PlantMaxLF
        L_Floc + T_PlantWall + L_ChannelSlot + W_EtWalkway otherwise
    };
    Z_Et
] = [0; 5.2436; 1.41454] m
Et_Origin1 := [
    Plant_Origin[0] - L_Sed + L_Et;
    Floc_Origin[1] + (N_FlocChannels*(W_FlocChannel + T_PlantWall)) + W_EtWalkway + T_PlantWall;
    Z_Et
] = [0; 5.2436; 1.41454] m
Et_Origin :=
    Et_Origin0 if EN_EtGrit == 0
    Et_Origin1 otherwise
Et_Dim := [L_Et; W_Et; H_Et] = [2.83912; 1.3532; 0.78358] m
EtHopper_Origin := [
    Et_Origin[0] - S_Fitting - ConRadius(ND_EtDrain) - L_EtHopper/2 - T_EtHopperLedge;
    Et_Origin[1] + W_Et;
    Et_Origin[2]
] = [-0.83518; 6.5968; 1.41454] m
Hopper_FarCorner := [Et_Origin[0] - L_EtHopper - T_EtHopperLedge; Et_Origin[1]; Z_EtHopper] = [-1.31876; 5.2436; 1.89812] m
HopperBack_FarCorner := [Et_Origin[0] - L_EtHopperBack; Et_Origin[1] + L_Et + W_Et; Et_Origin[2] + H_EtHopperBack] = [-0.7516; 9.43592; 1.89812] m
HopperFront_FarCorner := [Et_Origin[0] + L_EtHopperFront; Et_Origin[1] + L_Et; Et_Origin[2] + H_EtHopperFront] = [0.4; 8.08272; 1.81454] m
EtDC_Origin := Et_Origin + [-L_EtDC; L_EtHopperFront; -T_PlantWall]
# Hoppers and tank walls
EntTankLayer := layer_new("EtCon", grey)
EtHopper := WedgeF(EtHopper_Origin, Hopper_FarCorner, [0; 0; 0]*deg)
MirrorEtHopper := MirrorLast([EtHopper_Origin[0] + T_EtHopperLedge/2; EtHopper_Origin[1]], [EtHopper_Origin[0] + T_EtHopperLedge/2; EtHopper_Origin[1] + zc], "n")
EtHopperLedge := BoxF(EtHopper_Origin, EtHopper_Origin + [T_EtHopperLedge; -W_Et; H_EtHopper], [0; 0; 0]*deg)
ArrayEtHoppers := array_all(1, N_EtFullHopper + 1, -L_EtHopper - T_EtHopperLedge)
EtHopperBack := WedgeF(Et_Origin + [0; W_Et; 0], HopperBack_FarCorner, [90; 0; 0]*deg)
EtHopperFront := WedgeF(Et_Origin, HopperFront_FarCorner, [90; 0; 0]*deg)
EntTank := Tank(Et_Origin, Et_Dim, T_PlantWall)
# Drain channel
EtDC := DrainChannelF(EtDC_Origin + [0 m; W_EtDC; 0 m], [180; 0; 0]*deg, Q_EtDCMax, W_EtDC, H_EtDC, L_EtDC, 1 %, Nu_Water, E_Concrete, 1)
FreezeEntTank := FreezeLayer("EtCon")
# Trash rack slots
TrashRackSlot1 := BoxF(EtHopper_Origin + [T_EtHopperLedge/2 - T_ConcreteMin/2; 2*D_Rebar; H_EtHopper - 2*D_Rebar], EtHopper_Origin + [
    T_EtHopperLedge/2 - T_ConcreteMin/2 - 2*D_Rebar;
    -W_Et - 2*D_Rebar;
    H_EtHopper + H_EtTop + H_PlantFreeboard + zc
], [0; 0; 0]*deg)
TrashRackSlot2 := BoxF(EtHopper_Origin + [T_EtHopperLedge/2 + T_ConcreteMin/2; 2*D_Rebar; H_EtHopper - 2*D_Rebar], EtHopper_Origin + [
    T_EtHopperLedge/2 + T_ConcreteMin/2 + 2*D_Rebar;
    -W_Et - 2*D_Rebar;
    H_EtHopper + H_EtTop + H_PlantFreeboard + zc
], [0; 0; 0]*deg)
SubtractTrashRackSlots := SubtractF(["EtCon"], "DeleteMe")
# No-Grit Features
EtDrainSlope := WedgeF(Et_Origin - [L_Et; 0; 0], Et_Origin + [
    -L_Et + ConRadius(ND_EtFlowControl)/tan(30 deg);
    2*ConRadius(ND_EtFlowControl);
    -ConRadius(ND_EtFlowControl)
], [0; 0; 0]*deg)
FreezeEntTank := FreezeLayer("EtCon")
SubtractEtDrainSlope := SubtractF(["EtCon"], "DeleteMe")
EtBaffleLayer := layer_new("EtBaffle", ltgrey)
EtBaffle := BoxSUBF(Et_Origin + [-S_EtBaffle; -T_ConcreteMin; S_EtBaffleBottom], Et_Origin + [-S_EtBaffle - T_ConcreteMin; W_Et + T_ConcreteMin; H_Et], [0; 0; 0]*deg, ["EtCon"])
EtBaffleFrz := FreezeLayer("EtBaffle")
EtTankScript :=
    stack(EntTankLayer, EntTank, FreezeEntTank, EtDrainSlope, GroupDelete, SubtractEtDrainSlope, EtBaffleLayer, EtBaffle, EtBaffleFrz) if EN_EtGrit == 1
    stack(EntTankLayer, EtHopper, MirrorEtHopper, EtHopperLedge, ArrayEtHoppers, EtHopperBack, EtHopperFront, EntTank, EtDC, Union_All, FreezeEntTank, TrashRackSlot1, TrashRackSlot2, GroupDelete, SubtractTrashRackSlots) otherwise
# Entrance Tank Concrete Two Inlets
# Create Variable in expert inputs for thickness of diving wall and supports
# Origins and dimensions
Et_Origin0 := [
    Plant_Origin[0] - L_Sed + L_Et;
    Floc_Origin[1] + {
        (N_FlocChannels*(W_FlocChannel + T_FlocChannelWall)) + W_EtWalkway + 2*T_PlantWall - T_FlocChannelWall if Q_Plant > Q_PlantMaxLF
        L_Floc + T_PlantWall + L_ChannelSlot + W_EtWalkway otherwise
    };
    Z_Et
] = [0; 5.2436; 1.41454] m
Et_Origin1 := [
    Plant_Origin[0] - L_Sed + L_Et;
    Floc_Origin[1] + (N_FlocChannels*(W_FlocChannel + T_PlantWall)) + W_EtWalkway + T_PlantWall;
    Z_Et
] = [0; 5.2436; 1.41454] m
Et_Origin :=
    Et_Origin0 if EN_EtGrit == 0
    Et_Origin1 otherwise
Et_Dim := [L_Et; W_Et; H_Et] = [2.83912; 1.3532; 0.78358] m
EtHopper_Origin := [
    Et_Origin[0] - S_Fitting - ConRadius(ND_EtDrain) - L_EtHopper/2 - T_EtHopperLedge;
    Et_Origin[1] + W_Et;
    Et_Origin[2]
] = [-0.83518; 6.5968; 1.41454] m
Hopper_FarCorner := [Et_Origin[0] - L_EtHopper - T_EtHopperLedge; Et_Origin[1]; Z_EtHopper] = [-1.31876; 5.2436; 1.89812] m
# Use two inlet back far corner for first hopper and original for last two hoppers
HopperBack_FarCorner := [Et_Origin[0] - L_EtHopperBack; Et_Origin[1] + L_Et + W_Et; Et_Origin[2] + H_EtHopperBack] = [-0.7516; 9.43592; 1.89812] m
HopperBack_FarCornerTwoInlet := [
    Et_Origin[0] - L_EtHopperBack + (2*S_Fitting + T_EtRemovableWall + 2*T_EtRemovableWallSupport + 2*ConRadius(ND_EtDrain));
    Et_Origin[1] + L_Et + W_Et;
    Et_Origin[2] + H_EtHopperBack
] = [-0.4; 9.43592; 1.89812] m
HopperFront_FarCorner := [Et_Origin[0] + L_EtHopperFront; Et_Origin[1] + L_Et; Et_Origin[2] + H_EtHopperFront] = [0.4; 8.08272; 1.81454] m
EtDC_Origin := Et_Origin + [-L_EtDC; L_EtHopperFront; -T_PlantWall]
EtDividingWall_Origin := Et_Origin + [0 m; (L_EtHopperFront + 2*S_Fitting + 2*ConRadius(ND_EtDrain) + T_EtRemovableWallSupport); 0 m]
EtDividingWallSupportL_Origin := EtDividingWall_Origin + [0 m; (T_EtRemovableWall + T_EtRemovableWallSupport)/2; 0 m]
# Set both origins for support walls on opposite sides of the removable wall
EtDividingWallSupportR_Origin := EtDividingWall_Origin + [0 m; -(T_EtRemovableWall + T_EtRemovableWallSupport)/2; 0 m]
# Hoppers and tank walls
EntTankLayer := layer_new("EtCon", grey)
EtHopper := WedgeF(EtHopper_Origin, Hopper_FarCorner, [0; 0; 0]*deg)
MirrorEtHopper := MirrorLast([EtHopper_Origin[0] + T_EtHopperLedge/2; EtHopper_Origin[1]], [EtHopper_Origin[0] + T_EtHopperLedge/2; EtHopper_Origin[1] + zc], "n")
EtHopperLedge := BoxF(EtHopper_Origin, EtHopper_Origin + [T_EtHopperLedge; -W_Et; H_EtHopper], [0; 0; 0]*deg)
ArrayEtHoppers := array_all(1, N_EtFullHopper + 1, -L_EtHopper - T_EtHopperLedge)
# Have to change this or the hopper back far corner
# Incorporate 2 molds
# Make two wedges
EtHopperBack :=
    WedgeF(Et_Origin + [0; W_Et; 0], HopperBack_FarCornerTwoInlet, [90; 0; 0]*deg) if EN_TwoInlets == 1
    WedgeF(Et_Origin + [0; W_Et; 0], HopperBack_FarCorner, [90; 0; 0]*deg) otherwise
HopperBack_FarCorner = [-0.7516; 9.43592; 1.89812] m
HopperBack_FarCornerTwoInlet = [-0.4; 9.43592; 1.89812] m
ConRadius(ND_EtDrain) - S_Fitting - T_EtHopperLedge
[Et_Origin[0] - L_EtHopperBack; Et_Origin[1] + L_Et + W_Et; Et_Origin[2] + H_EtHopperBack]
EtHopperBack2 := WedgeF(Et_Origin + [-L_EtHopper/2 - T_EtHopperLedge; W_Et; 0], HopperBack_FarCorner + [-W_Et/2; -L_EtHopper/2; 0 m], [90; 0; 0]*deg)
Et_HopperBack :=
    EtHopperBack if EN_TwoInlets == 1
    EtHopperBack otherwise
[
    Et_Origin[0] - L_EtHopperBack + (2*S_Fitting + T_EtRemovableWall + 2*T_EtRemovableWallSupport + 2*ConRadius(ND_EtDrain));
    Et_Origin[1] + L_Et + W_Et;
    Et_Origin[2] + H_EtHopperBack
]
EtHopperFront := WedgeF(Et_Origin, HopperFront_FarCorner, [90; 0; 0]*deg)
EntTank := Tank(Et_Origin, Et_Dim, T_PlantWall)
EtDividingWallSupportL := BoxF(EtDividingWallSupportL_Origin, EtDividingWallSupportL_Origin + [
    -L_EtHopper/2 - ConRadius(ND_EtDrain) - S_Fitting;
    T_EtRemovableWallSupport;
    H_EtRemovableWallSupport
], [0; 0; 0]*deg)
EtDividingWallSupportR := BoxF(EtDividingWallSupportR_Origin, EtDividingWallSupportR_Origin + [
    -L_EtHopper/2 - ConRadius(ND_EtDrain) - S_Fitting;
    T_EtRemovableWallSupport;
    H_EtRemovableWallSupport
], [0; 0; 0]*deg)
Hopper_FarCorner := [Et_Origin[0] - L_EtHopper - T_EtHopperLedge; Et_Origin[1]; Z_EtHopper] = [-1.31876; 5.2436; 1.89812] m
EtDividingWallSupportWedgeR := WedgeF(EtDividingWallSupportR_Origin + [-L_EtHopper/2 - ConRadius(ND_EtDrain) - S_Fitting; 0 m; H_EtRemovableWallSupport], EtDividingWallSupportR_Origin + [
    -2*ConRadius(ND_EtDrain) - 2*S_Fitting;
    T_EtRemovableWallSupport;
    H_EtHopper + H_EtRemovableWallSupport
], [0; 0; 0]*deg)
WedgeF(EtDividingWall_Origin + [-L_EtHopper/2 - ConRadius(ND_EtDrain) - S_Fitting; 0 m; 0 m], EtDividingWall_Origin + [2*S_Fitting + 2*ConRadius(ND_EtDrain); T_EtRemovableWall; H_EtHopper], [0; 0; 0]*deg)
DividingWallSupportWedgeL := WedgeF(EtDividingWallSupportL_Origin + [-L_EtHopper/2 - ConRadius(ND_EtDrain) - S_Fitting; 0 m; H_EtRemovableWallSupport], EtDividingWallSupportL_Origin + [
    -2*ConRadius(ND_EtDrain) - 2*S_Fitting;
    T_EtRemovableWallSupport;
    H_EtHopper + H_EtRemovableWallSupport
], [0; 0; 0]*deg)
DividingWallSupportL, GroupDelete, SubtractDividingWallSupport
SubtractDividingWallSupport := SubtractF(["EtCon"], "DeleteMe")
EntDividingWall := stack(EtDividingWallSupportL, EtDividingWallSupportR, EtDividingWallSupportWedgeR, DividingWallSupportWedgeL)
# Drain channel
EtDC := DrainChannelF(EtDC_Origin + [0 m; W_EtDC; 0 m], [180; 0; 0]*deg, Q_EtDCMax, W_EtDC, H_EtDC, L_EtDC, 1 %, Nu_Water, E_Concrete, 1)
FreezeEntTank := FreezeLayer("EtCon")
# Trash rack slots
TrashRackSlot1 := BoxF(EtHopper_Origin + [T_EtHopperLedge/2 - T_ConcreteMin/2; 2*D_Rebar; H_EtHopper - 2*D_Rebar], EtHopper_Origin + [
    T_EtHopperLedge/2 - T_ConcreteMin/2 - 2*D_Rebar;
    -W_Et - 2*D_Rebar;
    H_EtHopper + H_EtTop + H_PlantFreeboard + zc
], [0; 0; 0]*deg)
TrashRackSlot2 := BoxF(EtHopper_Origin + [T_EtHopperLedge/2 + T_ConcreteMin/2; 2*D_Rebar; H_EtHopper - 2*D_Rebar], EtHopper_Origin + [
    T_EtHopperLedge/2 + T_ConcreteMin/2 + 2*D_Rebar;
    -W_Et - 2*D_Rebar;
    H_EtHopper + H_EtTop + H_PlantFreeboard + zc
], [0; 0; 0]*deg)
SubtractTrashRackSlots := SubtractF(["EtCon"], "DeleteMe")
# Removable Wall
EtRemovableLayer := layer_new("EtRemovWall", ltgrey)
EtDividingWall := BoxF(EtDividingWall_Origin, EtDividingWall_Origin + [-L_EtHopper/2 - ConRadius(ND_EtDrain) - S_Fitting; T_EtRemovableWall; H_Et], [0; 0; 0]*deg)
FreezeEntRemovable := FreezeLayer("EtRemovWall")
DividingWallWedge := WedgeF(EtDividingWall_Origin + [-L_EtHopper/2 - ConRadius(ND_EtDrain) - S_Fitting; 0 m; 0 m], EtDividingWall_Origin + [-2*S_Fitting - 2*ConRadius(ND_EtDrain); T_EtRemovableWall; H_EtHopper], [0; 0; 0]*deg)
SubtractDividingWallWedge := SubtractF(["EtRemovWall"], "DeleteMe")
RemovableWall := stack(EtRemovableLayer, EtDividingWall, FreezeEntRemovable, DividingWallWedge, GroupDelete, SubtractDividingWallWedge, FreezeEntRemovable)
EtTankScript2 := stack(EntTankLayer, EtHopper, MirrorEtHopper, EtHopperLedge, ArrayEtHoppers, EtHopperBack, EtHopperBack2, EtHopperFront, EntTank, EntDividingWall, EtDC, Union_All, FreezeEntTank, RemovableWall, TrashRackSlot1, TrashRackSlot2, GroupDelete, SubtractTrashRackSlots)
# Trash Rack
TRLayer := layer_new("EtTrashrack", yellow)
HorizCylinder := CylinderF(EtHopper_Origin + [T_EtHopperLedge/2 - T_ConcreteMin/2 - D_Rebar/2; 2*D_Rebar; H_EtHopper - 3/2*D_Rebar], D_Rebar/2, W_Et + 4*D_Rebar, [90; 0]*deg)
ViewRight := view("r")
ArrayHorizCylinder := ArrayLast(N_TRSpacesH + 1, 1, B_EtRebar)
ViewTop := view("t")
VertCylinder := CylinderF(EtHopper_Origin + [T_EtHopperLedge/2 - T_ConcreteMin/2 - 3*D_Rebar/2; 3/2*D_Rebar; H_EtHopper - 2*D_Rebar], D_Rebar/2, (N_TRSpacesH + 1)*B_EtRebar - D_Rebar, [0; 90]*deg)
ArrayVertCyl := ArrayLast(1, N_TRSpacesV + 1, -B_EtRebar)
ArrayAll := array_all(1, 2, T_ConcreteMin + 2*D_Rebar)
Freeze := FreezeLayer("EtTrashrack")
EtTrashRackScript := stack(TRLayer, HorizCylinder, ViewRight, ArrayHorizCylinder, ViewTop, VertCylinder, ViewRight, ArrayVertCyl, ViewTop, ArrayAll, Freeze)
# Rapid Mix Pipe, LFOM, and Orifice Plate
# this is the upper elbow (connected to the LFOM)
RMElbow_Origin0 := [
    Plant_Origin[0] - L_Sed + S_Fitting + ConRadius(ND_RMPipe);
    Et_Origin[1] + W_Et - S_Fitting - ConRadius(ND_RMPipe) - ElbowRadius(ND_RMPipe);
    FlocCoupling_Origin[2]
]
RMElbow_Origin1 := [
    Plant_Origin[0] - L_Sed + S_Fitting + ConRadius(ND_RMPipe);
    Et_Origin[1] + W_Et - 2*S_Fitting - ConRadius(ND_RMPipe) - ElbowRadius(ND_RMPipe) - 2*ConRadius(ND_EtOverflowDrain);
    FlocCoupling_Origin[2]
]
RMElbow_Origin :=
    RMElbow_Origin0 if EN_EtGrit == 0
    RMElbow_Origin1 otherwise
    = [-2.72483; 6.33011; 0.10715] m
RMAirRelease_Origin := [
    RMElbow_Origin[0];
    Floc_Origin[1] + (N_FlocChannels*(W_FlocChannel + T_FlocChannelWall)) + T_PlantWall - T_FlocChannelWall + S_Fitting;
    FlocCoupling_Origin[2] + innerdiameter(ND_RMPipe, PS_Default)/2 - zc
]
L_RMPipeHoriz := (Et_Origin[1] + W_Et - S_Fitting - ConRadius(ND_RMPipe) - ElbowRadius(ND_RMPipe)) - (Floc_Origin[1] + N_FlocChannels*W_FlocChannel + (N_FlocChannels - 1)*T_FlocChannelWall - L_FlocCouplingExt + CouplingLength(ND_RMPipe) - SocketDepth(ND_RMPipe)) = 2.37444 m
L_RMPipeVert := Z_EtTop - (RMElbow_Origin[2] + ElbowRadius(ND_RMPipe)) = 1.93857 m
L_RMAirRelease := Floc_Origin[2] + H_Floc - (FlocCoupling_Origin[2] + innerdiameter(ND_RMPipe, PS_Default)/2 - zc)
# RM Elbow
RMElbowLayer := layer_new("EtRmElbowPlu", green)
RMElbow := ElbowSUBF(RMElbow_Origin, [0; 90; 0]*deg, ND_RMPipe, PS_Default, ["EtCon"])
FreezeRMElbow := FreezeLayer("EtRmElbowPlu")
# RM Pipes
RMPipeLayer := layer_new("EtRmPipePlu", blue)
RMVertPipe := PipeSUBF([
    RMElbow_Origin[0];
    RMElbow_Origin[1] + ElbowRadius(ND_RMPipe);
    RMElbow_Origin[2] + ElbowRadius(ND_RMPipe)
], L_RMPipeVert, [0; 90; 0]*deg, ND_RMPipe, PS_Default, ["EtCon"])
RMHorizPipe := PipeF(RMElbow_Origin, L_RMPipeHoriz, [90; 0; 0]*deg, ND_RMPipe, PS_Default)
RMAirRelease := PipeF(RMAirRelease_Origin, L_RMAirRelease, [0; 90; 0]*deg, ND_RMAirRelease, PS_Default)
RMAirReleaseHole := CylinderF([RMAirRelease_Origin[0]; RMAirRelease_Origin[1]; FlocCoupling_Origin[2]], outerradius(ND_RMAirRelease), outerradius(ND_RMPipe) + zc, [0; 90; 0]*deg)
FreezeRMPipe := FreezeLayer("EtRmPipePlu")
SelectRMPipes := SelectLayer("EtRmPipePlu")
# LFOM Orifices
LFOM_Origin0 := [RMElbow_Origin[0]; RMElbow_Origin[1] + ElbowRadius(ND_RMPipe); ZW_Et - HL_Flowmeasure]
LFOM_Origin1 := [RMElbow_Origin[0]; RMElbow_Origin[1] + ElbowRadius(ND_RMPipe); ZW_Et - HL_Flowmeasure]
LFOM_Origin :=
    LFOM_Origin0 if EN_EtGrit == 0
    LFOM_Origin1 otherwise
LfomOrifices :=
    Local ← FreezeRMPipe
    for h ∈ 0 .. last(H_LfomOrifices)
        if N_LfomOrifices[h] ≠ 0
            Local ← stack(Local, CylinderF([LFOM_Origin[0]; LFOM_Origin[1]; LFOM_Origin[2] + H_LfomOrifices[h]], D_LfomOrifices/2, outerradius(ND_RMPipe) + zc, [
                90 deg + (asin(0.5*S_LfomOrificesMin/(2*outerradius(ND_RMPipe))) + asin(D_LfomOrifices/(2*outerradius(ND_RMPipe))))*(mod(h, 2) == 0);
                0 deg
            ]))
        Local ← stack(Local, ArrayLastPolar([LFOM_Origin[0]; LFOM_Origin[1]; LFOM_Origin[2] + H_LfomOrifices[h]], N_LfomOrifices[h], (N_LfomOrifices[h] - 1)*(2*asin(D_LfomOrifices/(2*outerradius(ND_RMPipe))) + 2*asin(S_LfomOrificesMin/(2*outerradius(ND_RMPipe)))))) if N_LfomOrifices[h] > 1
    return Local
SubtractRMPipeOrifices := SubtractF(["EtRmPipePlu"], "DeleteMe")
RMScript := stack(RMElbowLayer, RMElbow, FreezeRMElbow, RMPipeLayer, RMVertPipe, RMHorizPipe, FreezeRMPipe, RMAirReleaseHole, GroupDelete, SubtractRMPipeOrifices, SelectRMPipes, RMAirRelease, LfomOrifices, GroupDelete, SubtractRMPipeOrifices)
DrainCouplingLayer := layer_new("EtDrainCouplingsPlu", green)
DrainWeirCoupling := CouplingSUBF([
    -S_Fitting - ConRadius(ND_EtDrain);
    ConRadius(ND_EtDrain) + S_Fitting + L_EtHopperFront;
    -SocketDepth(ND_EtDrain)
] + Et_Origin, [0; 270]*deg, ND_EtDrain, PS_Default, ["EtCon"])
DrainCouplings :=
    Local ← stack(DrainCouplingLayer, DrainWeirCoupling)
    for i ∈ 0 .. (N_EtFullHopper + 1)
        Local ← stack(Local, CouplingSUBF([
            -(L_EtHopper + T_EtHopperLedge)*i - S_Fitting - ConRadius(ND_EtDrain);
            ConRadius(ND_EtDrain) + S_Fitting + L_EtHopperFront;
            -SocketDepth(ND_EtDrain)
        ] + Et_Origin, [0; 270]*deg, ND_EtDrain, PS_Default, ["EtCon"]))
FreezeDrainCouplings := FreezeLayer("EtDrainCouplingsPlu")
DrainPipeLayer := layer_new("EtDrainPipesPlu", blue)
DrainPipes :=
    Local ← stack(FreezeDrainCouplings, DrainPipeLayer)
    for i ∈ 0 .. N_EtFullHopper + 1
        Local ← stack(Local, PipeSUBF([
            -(L_EtHopper + T_EtHopperLedge)*i - S_Fitting - ConRadius(ND_EtDrain);
            ConRadius(ND_EtDrain) + S_Fitting + L_EtHopperFront;
            SocketDepth(ND_EtDrain) - CouplingLength(ND_EtDrain)
        ] + Et_Origin, T_PlantWall, [0; 270; 0]*deg, ND_EtDrain, PS_Default, ["EtCon"]))
FreezePipes := FreezeLayer("EtDrainPipesPlu")
StopperLayer := layer_new("EtDrainStoppersPlu", red)
L_EtDrainStopper := H_Et - H_PlantFreeboard/2 + SocketDepth(ND_EtDrain)
FirstStopper := PipeF([
    -S_Fitting - ConRadius(ND_EtDrain);
    ConRadius(ND_EtDrain) + S_Fitting + L_EtHopperFront;
    -SocketDepth(ND_EtDrain)
] + Et_Origin, L_EtDrainStopper, [0; 90; 0]*deg, ND_EtDrain, PS_Default)
StopperPipes :=
    Local ← stack(FreezePipes, StopperLayer)
    for i ∈ 0 .. N_EtFullHopper + 1
        Local ← stack(Local, PipeF([
            -(L_EtHopper + T_EtHopperLedge)*i - S_Fitting - ConRadius(ND_EtDrain);
            ConRadius(ND_EtDrain) + S_Fitting + L_EtHopperFront;
            -SocketDepth(ND_EtDrain)
        ] + Et_Origin, L_EtDrainStopper, [0; 90; 0]*deg, ND_EtDrain, PS_Default))
FreezeStopper := FreezeLayer("EtDrainStoppersPlu")
EtDrainsRight := stack(DrainCouplings, DrainPipes, StopperPipes, FreezeStopper)
ThawDrains := ThawMultiple(["EtCon"; "EtDrainCouplingsPlu"; "EtDrainPipesPlu"; "EtWeir"; "EtTrashrack"; "Cdc"; "CdcFittings"; "EtDrainStoppersPlu"])
MirrorDrains := Mirror3dAll("YZ", [Plant_Origin[0] - 1/2*L_Sed; 0 m; 0 m], "Y")
FreezeDrains := FreezeMultiple(["EtCon"; "EtDrainCouplingsPlu"; "EtDrainPipesPlu"; "EtWeir"; "EtTrashrack"; "Cdc"; "CdcFittings"; "EtDrainStoppersPlu"])
EtDrainsLeft := stack(ThawDrains, MirrorDrains, FreezeDrains)
# Hopper Drains
# Hopper Drains Two Inlets
# The way our change works is we have functions to mirror the drains. This originally included a i = 0
# section for the first hopper drain piece, but this was taken out for the three areas (Drain Coupling, Pipe, and stopper.
#
# Then I added this first part in before the full stack function to create two pieces (two drains, two couplings, to stoppers) in the first hopper. Making them independent of the mirror function allows us to change their location easily without modifying the rest.
# New Variables to adjust the Second Drain Location
2*T_EtRemovableWallSupport + T_EtRemovableWall + S_Fitting
DrainCouplingLayer := layer_new("EtDrainCouplingsPlu", green)
# Start at first full hopper - change origin
DrainWeirCoupling := CouplingSUBF([
    (-S_Fitting - ConRadius(ND_EtDrain));
    ConRadius(ND_EtDrain) + S_Fitting + L_EtHopperFront;
    -SocketDepth(ND_EtDrain)
] + Et_Origin, [0; 270]*deg, ND_EtDrain, PS_Default, ["EtCon"])
DrainWeirCoupling_1 := CouplingSUBF([
    (-S_Fitting - ConRadius(ND_EtDrain));
    ConRadius(ND_EtDrain) + S_Fitting + L_EtHopperFront + 2*ConRadius(ND_EtDrain) + S_Fitting + (2*T_EtRemovableWallSupport + T_EtRemovableWall + S_Fitting);
    -SocketDepth(ND_EtDrain)
] + Et_Origin, [0; 270]*deg, ND_EtDrain, PS_Default, ["EtCon"])
DrainCouplings :=
    Local ← stack(DrainCouplingLayer, DrainWeirCoupling, DrainWeirCoupling_1)
    for i ∈ 1 .. (N_EtFullHopper + 1)
        Local ← stack(Local, CouplingSUBF([
            -(L_EtHopper + T_EtHopperLedge)*i - S_Fitting - ConRadius(ND_EtDrain);
            ConRadius(ND_EtDrain) + S_Fitting + L_EtHopperFront;
            -SocketDepth(ND_EtDrain)
        ] + Et_Origin, [0; 270]*deg, ND_EtDrain, PS_Default, ["EtCon"]))
# Stacks both couplings in first
# hopper and adds row of the rest
# of the hoppers
# I added Drain Weir Coupling.1
# Started i at 1 instead of 0. 0 is
# Covered in Drain weir Coupling
FreezeDrainCouplings := FreezeLayer("EtDrainCouplingsPlu")
DrainPipeLayer := layer_new("EtDrainPipesPlu", blue)
# Created two
# Drain SUBF's
DrainPipe_0 := PipeSUBF([
    -S_Fitting - ConRadius(ND_EtDrain);
    ConRadius(ND_EtDrain) + S_Fitting + L_EtHopperFront;
    SocketDepth(ND_EtDrain) - CouplingLength(ND_EtDrain)
] + Et_Origin, T_PlantWall, [0; 270; 0]*deg, ND_EtDrain, PS_Default, ["EtCon"])
DrainPipe_1 := PipeSUBF([
    -S_Fitting - ConRadius(ND_EtDrain);
    ConRadius(ND_EtDrain) + S_Fitting + L_EtHopperFront + (2*ConRadius(ND_EtDrain) + S_Fitting) + (2*T_EtRemovableWallSupport + T_EtRemovableWall + S_Fitting);
    SocketDepth(ND_EtDrain) - CouplingLength(ND_EtDrain)
] + Et_Origin, T_PlantWall, [0; 270; 0]*deg, ND_EtDrain, PS_Default, ["EtCon"])
DrainPipes :=
    Local ← stack(FreezeDrainCouplings, DrainPipeLayer, DrainPipe_0, DrainPipe_1)
    for i ∈ 1 .. N_EtFullHopper + 1
        Local ← stack(Local, PipeSUBF([
            -(L_EtHopper + T_EtHopperLedge)*i - S_Fitting - ConRadius(ND_EtDrain);
            ConRadius(ND_EtDrain) + S_Fitting + L_EtHopperFront;
            SocketDepth(ND_EtDrain) - CouplingLength(ND_EtDrain)
        ] + Et_Origin, T_PlantWall, [0; 270; 0]*deg, ND_EtDrain, PS_Default, ["EtCon"]))
# Added in first two pipes to local
# Changed i to 1 from 0
FreezePipes := FreezeLayer("EtDrainPipesPlu")
StopperLayer := layer_new("EtDrainStoppersPlu", red)
L_EtDrainStopper := H_Et - H_PlantFreeboard/2 + SocketDepth(ND_EtDrain)
FirstStopper_0 := PipeF([
    (-S_Fitting - ConRadius(ND_EtDrain));
    ConRadius(ND_EtDrain) + S_Fitting + L_EtHopperFront;
    -SocketDepth(ND_EtDrain)
] + Et_Origin, L_EtDrainStopper, [0; 90; 0]*deg, ND_EtDrain, PS_Default)
# Two New functions
# taken from StopperPipes
# Function for first two
# stoppers
FirstStopper_1 := PipeF([
    (-S_Fitting - ConRadius(ND_EtDrain));
    ConRadius(ND_EtDrain) + S_Fitting + L_EtHopperFront + (2*ConRadius(ND_EtDrain) + S_Fitting) + (2*T_EtRemovableWallSupport + T_EtRemovableWall + S_Fitting);
    -SocketDepth(ND_EtDrain)
] + Et_Origin, L_EtDrainStopper, [0; 90; 0]*deg, ND_EtDrain, PS_Default)
# Changed i to 1
# added to layer
StopperPipes :=
    Local ← stack(FreezePipes, StopperLayer, FirstStopper_0, FirstStopper_1)
    for i ∈ 1 .. N_EtFullHopper + 1
        Local ← stack(Local, PipeF([
            -(L_EtHopper + T_EtHopperLedge)*i - S_Fitting - ConRadius(ND_EtDrain);
            ConRadius(ND_EtDrain) + S_Fitting + L_EtHopperFront;
            -SocketDepth(ND_EtDrain)
        ] + Et_Origin, L_EtDrainStopper, [0; 90; 0]*deg, ND_EtDrain, PS_Default))
FreezeStopper := FreezeLayer("EtDrainStoppersPlu")
EtDrainsRight := stack(DrainCouplings, DrainPipes, StopperPipes, FreezeStopper)
ThawDrains := ThawMultiple(["EtCon"; "EtDrainCouplingsPlu"; "EtDrainPipesPlu"; "EtWeir"; "EtTrashrack"; "Cdc"; "CdcFittings"; "EtDrainStoppersPlu"])
MirrorDrains := Mirror3dAll("YZ", [Plant_Origin[0] - 1/2*L_Sed; 0 m; 0 m], "Y")
FreezeDrains := FreezeMultiple(["EtCon"; "EtDrainCouplingsPlu"; "EtDrainPipesPlu"; "EtWeir"; "EtTrashrack"; "Cdc"; "CdcFittings"; "EtDrainStoppersPlu"])
EtDrainsLeft := stack(ThawDrains, MirrorDrains, FreezeDrains)
# Overflow Drain Grit
# The half of the PVC overflow channel closer to the right-hand end of the tank (from top view):
L_EtFrontToOverflowWeir := L_EtHopperFront + 2*ConRadius(ND_EtDrain) + 2*S_Fitting + ConRadius(ND_EtOverflowDrain)
EtChannelPipe1 := PipeF(Et_Origin + [
    -CapThickness(ND_EtOverflowDrain);
    L_EtFrontToOverflowWeir;
    H_EtHopper + HL_Flowmeasure - innerdiameter(ND_EtOverflowDrain, PS_Default)/2 + H_EtOverflowCutaway + H_EtLFOMtoOverflow
], L_EtChannelPipes, [0; 0; 0]*deg, ND_EtOverflowDrain, PS_Default)
# The half of the PVC overflow channel closer to the trash rack:
EtChannelPipe2 := PipeF(Et_Origin + [
    -CapThickness(ND_EtOverflowDrain) - L_EtChannelPipes - TeeLength(ND_EtOverflowDrain);
    L_EtFrontToOverflowWeir;
    H_EtHopper + HL_Flowmeasure - innerdiameter(ND_EtOverflowDrain, PS_Default)/2 + H_EtOverflowCutaway + H_EtLFOMtoOverflow
], L_EtChannelPipes, [0; 0; 0]*deg, ND_EtOverflowDrain, PS_Default)
EtOverflowTee := TeeF(Et_Origin + [
    -CapThickness(ND_EtOverflowDrain) - L_EtChannelPipes - TeeLength(ND_EtOverflowDrain)/2;
    L_EtFrontToOverflowWeir;
    H_EtHopper + HL_Flowmeasure - innerdiameter(ND_EtOverflowDrain, PS_Default)/2 + H_EtOverflowCutaway + H_EtLFOMtoOverflow - ShortTeeLength(ND_EtOverflowDrain)
], [0; 0; -90]*deg, ND_EtOverflowDrain, PS_Default)
EtOverflowCap1 := CapF(Et_Origin + [
    -CapThickness(ND_EtOverflowDrain);
    L_EtFrontToOverflowWeir;
    H_EtHopper + HL_Flowmeasure - innerdiameter(ND_EtOverflowDrain, PS_Default)/2 + H_EtOverflowCutaway + H_EtLFOMtoOverflow
], [0; 0; 0]*deg, ND_EtOverflowDrain)
EtOverflowCap2 := CapF(Et_Origin + [
    -CapThickness(ND_EtOverflowDrain) - 2*L_EtChannelPipes - TeeLength(ND_EtOverflowDrain);
    L_EtFrontToOverflowWeir;
    H_EtHopper + HL_Flowmeasure - innerdiameter(ND_EtOverflowDrain, PS_Default)/2 + H_EtOverflowCutaway + H_EtLFOMtoOverflow
], [0; 180; 0]*deg, ND_EtOverflowDrain)
L_EtOverflowPipeVert0 := H_EtHopper + HL_Flowmeasure - innerdiameter(ND_EtOverflowDrain, PS_Default)/2 + H_EtOverflowCutaway + H_EtLFOMtoOverflow - ShortTeeLength(ND_EtOverflowDrain) + T_PlantWall + zc
EtOverflowPipeVert := PipeSUBF(Et_Origin + [
    -CapThickness(ND_EtOverflowDrain) - L_EtChannelPipes - TeeLength(ND_EtOverflowDrain)/2;
    L_EtFrontToOverflowWeir;
    H_EtHopper + HL_Flowmeasure - innerdiameter(ND_EtOverflowDrain, PS_Default)/2 + H_EtOverflowCutaway + H_EtLFOMtoOverflow - ShortTeeLength(ND_EtOverflowDrain)
], L_EtOverflowPipeVert0, [0; -90; 0]*deg, ND_EtOverflowDrain, PS_Default, ["EtCon"])
EtOverflowElbow := ElbowSUBF(Et_Origin + [
    -CapThickness(ND_EtOverflowDrain) - L_EtChannelPipes - TeeLength(ND_EtOverflowDrain)/2;
    L_EtFrontToOverflowWeir;
    -T_PlantWall - ConRadius(ND_EtOverflowDrain) + ElbowRadius(ND_EtOverflowDrain)
], [90; 270; 0]*deg, ND_EtOverflowDrain, PS_Default, ["EtCon"])
EtOverflowWeirSlot := BoxF(Et_Origin + [
    0;
    L_EtFrontToOverflowWeir - W_EtOverflowSlot/2;
    H_EtHopper + HL_Flowmeasure + H_EtLFOMtoOverflow - zc
], Et_Origin + [
    -CapThickness(ND_EtOverflowDrain) - L_EtOverflowWeir/2;
    L_EtFrontToOverflowWeir + W_EtOverflowSlot/2;
    H_EtHopper + HL_Flowmeasure + H_EtOverflowCutaway + H_EtLFOMtoOverflow + CapThickness(ND_EtOverflowDrain) + 2*zc
], [0; 0; 0]*deg)
EtOverflowFittingLayer := layer_new("EtOverflowFittingPlu", green)
FreezeEtOverflowFittings := FreezeLayer("EtOverflowFittingPlu")
EtOverflowPipeLayer := layer_new("EtOverflowPipePlu", blue)
FreezeEtOverflowPipe := FreezeLayer("EtOverflowPipePlu")
SubtractSlotFromFittings := SubtractF(["EtOverflowFittingPlu"], "DeleteMe")
SubtractSlotFromPipes := SubtractF(["EtOverflowPipePlu"], "DeleteMe")
EtOverflowPluScript0 := stack(EtOverflowFittingLayer, EtOverflowTee, EtOverflowCap1, EtOverflowCap2, FreezeEtOverflowFittings, EtOverflowPipeLayer, EtOverflowPipeVert, EtChannelPipe1, EtChannelPipe2, FreezeEtOverflowPipe, EtOverflowWeirSlot, GroupDelete, SubtractSlotFromFittings, EtOverflowWeirSlot, GroupAll("DeleteMe"), SubtractSlotFromPipes)
# Overflow Drain Grit Two Inlets
# The half of the PVC overflow channel closer to the right-hand end of the tank (from top view):
L_EtFrontToOverflowWeir := L_EtHopperFront + 2*ConRadius(ND_EtDrain) + 2*S_Fitting + ConRadius(ND_EtOverflowDrain)
Et_OverflowWeirOrigin := Et_Origin + [-L_EtHopper; 0 m; 0 m]
EtChannelPipe1 := PipeF(Et_OverflowWeirOrigin + [
    -CapThickness(ND_EtOverflowDrain);
    L_EtFrontToOverflowWeir;
    H_EtHopper + HL_Flowmeasure - innerdiameter(ND_EtOverflowDrain, PS_Default)/2 + H_EtOverflowCutaway + H_EtLFOMtoOverflow
], L_EtChannelPipes, [0; 0; 0]*deg, ND_EtOverflowDrain, PS_Default)
# The half of the PVC overflow channel closer to the trash rack:
EtChannelPipe2 := PipeF(Et_OverflowWeirOrigin + [
    -CapThickness(ND_EtOverflowDrain) - L_EtChannelPipes - TeeLength(ND_EtOverflowDrain);
    L_EtFrontToOverflowWeir;
    H_EtHopper + HL_Flowmeasure - innerdiameter(ND_EtOverflowDrain, PS_Default)/2 + H_EtOverflowCutaway + H_EtLFOMtoOverflow
], L_EtChannelPipes, [0; 0; 0]*deg, ND_EtOverflowDrain, PS_Default)
EtOverflowTee := TeeF(Et_OverflowWeirOrigin + [
    -CapThickness(ND_EtOverflowDrain) - L_EtChannelPipes - TeeLength(ND_EtOverflowDrain)/2;
    L_EtFrontToOverflowWeir;
    H_EtHopper + HL_Flowmeasure - innerdiameter(ND_EtOverflowDrain, PS_Default)/2 + H_EtOverflowCutaway + H_EtLFOMtoOverflow - ShortTeeLength(ND_EtOverflowDrain)
], [0; 0; -90]*deg, ND_EtOverflowDrain, PS_Default)
EtOverflowCap1 := CapF(Et_OverflowWeirOrigin + [
    -CapThickness(ND_EtOverflowDrain);
    L_EtFrontToOverflowWeir;
    H_EtHopper + HL_Flowmeasure - innerdiameter(ND_EtOverflowDrain, PS_Default)/2 + H_EtOverflowCutaway + H_EtLFOMtoOverflow
], [0; 0; 0]*deg, ND_EtOverflowDrain)
EtOverflowCap2 := CapF(Et_OverflowWeirOrigin + [
    -CapThickness(ND_EtOverflowDrain) - 2*L_EtChannelPipes - TeeLength(ND_EtOverflowDrain);
    L_EtFrontToOverflowWeir;
    H_EtHopper + HL_Flowmeasure - innerdiameter(ND_EtOverflowDrain, PS_Default)/2 + H_EtOverflowCutaway + H_EtLFOMtoOverflow
], [0; 180; 0]*deg, ND_EtOverflowDrain)
L_EtOverflowPipeVert0 := H_EtHopper + HL_Flowmeasure - innerdiameter(ND_EtOverflowDrain, PS_Default)/2 + H_EtOverflowCutaway + H_EtLFOMtoOverflow - ShortTeeLength(ND_EtOverflowDrain) + T_PlantWall + zc
EtOverflowPipeVert := PipeSUBF(Et_OverflowWeirOrigin + [
    -CapThickness(ND_EtOverflowDrain) - L_EtChannelPipes - TeeLength(ND_EtOverflowDrain)/2;
    L_EtFrontToOverflowWeir;
    H_EtHopper + HL_Flowmeasure - innerdiameter(ND_EtOverflowDrain, PS_Default)/2 + H_EtOverflowCutaway + H_EtLFOMtoOverflow - ShortTeeLength(ND_EtOverflowDrain)
], L_EtOverflowPipeVert0, [0; -90; 0]*deg, ND_EtOverflowDrain, PS_Default, ["EtCon"])
EtOverflowElbow := ElbowSUBF(Et_OverflowWeirOrigin + [
    -CapThickness(ND_EtOverflowDrain) - L_EtChannelPipes - TeeLength(ND_EtOverflowDrain)/2;
    L_EtFrontToOverflowWeir;
    -T_PlantWall - ConRadius(ND_EtOverflowDrain) + ElbowRadius(ND_EtOverflowDrain)
], [90; 270; 0]*deg, ND_EtOverflowDrain, PS_Default, ["EtCon"])
EtOverflowWeirSlot := BoxF(Et_OverflowWeirOrigin + [
    0;
    L_EtFrontToOverflowWeir - W_EtOverflowSlot/2;
    H_EtHopper + HL_Flowmeasure + H_EtLFOMtoOverflow - zc
], Et_OverflowWeirOrigin + [
    -CapThickness(ND_EtOverflowDrain) - L_EtOverflowWeir/2;
    L_EtFrontToOverflowWeir + W_EtOverflowSlot/2;
    H_EtHopper + HL_Flowmeasure + H_EtOverflowCutaway + H_EtLFOMtoOverflow + CapThickness(ND_EtOverflowDrain) + 2*zc
], [0; 0; 0]*deg)
EtOverflowFittingLayer := layer_new("EtOverflowFittingPlu", green)
FreezeEtOverflowFittings := FreezeLayer("EtOverflowFittingPlu")
EtOverflowPipeLayer := layer_new("EtOverflowPipePlu", blue)
FreezeEtOverflowPipe := FreezeLayer("EtOverflowPipePlu")
Et_OverflowWeirPipe
SubtractSlotFromFittings := SubtractF(["EtOverflowFittingPlu"], "DeleteMe")
SubtractSlotFromPipes := SubtractF(["EtOverflowPipePlu"], "DeleteMe")
EtOverflowPluScript2 := stack(EtOverflowFittingLayer, EtOverflowTee, EtOverflowCap1, EtOverflowCap2, FreezeEtOverflowFittings, EtOverflowPipeLayer, EtOverflowPipeVert, EtChannelPipe1, EtChannelPipe2, FreezeEtOverflowPipe, EtOverflowWeirSlot, GroupDelete, SubtractSlotFromFittings, EtOverflowWeirSlot, GroupAll("DeleteMe"), SubtractSlotFromPipes)
# Overflow Drain No Grit
EtOverflowElbow_Origin := [
    -L_Et + 2*(S_Fitting + ConRadius(ND_RMPipe)) + SocketDepth(ND_EtOverflowDrain) + ElbowRadius(ND_EtOverflowDrain);
    W_Et/2;
    -max(T_PlantWall, CouplingLength(ND_EtOverflowDrain)) - SocketDepth(ND_EtOverflowDrain)
] + Et_Origin
EtOverflowCoupling_Origin := [
    -L_Et + 2*(S_Fitting + ConRadius(ND_RMPipe)) + SocketDepth(ND_EtOverflowDrain) + ElbowRadius(ND_EtOverflowDrain);
    W_Et/2;
    -SocketDepth(ND_EtOverflowDrain)
] + Et_Origin
EtOverflowTee_Origin := [
    EtOverflowCoupling_Origin[0];
    EtOverflowCoupling_Origin[1];
    Et_Origin[2] + H_Et - H_PlantFreeboard + H_EtLFOMtoOverflow + H_EtOverflowCutaway - innerdiameter(ND_EtOverflowDrain, PS_Default)/2 - ShortTeeLength(ND_EtOverflowDrain)
]
EtOverflowCap1_Origin := [
    EtOverflowTee_Origin[0];
    Et_Origin[1] + W_Et - CapThickness(ND_EtOverflowDrain);
    EtOverflowTee_Origin[2] + ShortTeeLength(ND_EtOverflowDrain)
]
EtOverflowCap2_Origin := [
    EtOverflowTee_Origin[0];
    Et_Origin[1] + CapThickness(ND_EtOverflowDrain);
    EtOverflowTee_Origin[2] + ShortTeeLength(ND_EtOverflowDrain)
]
EtOverflowFittingsLayer := layer_new("EtOverflowDrainFittingsPlu", green)
EtOverflowElbow := ElbowF(EtOverflowElbow_Origin, [0; 0; 270]*deg, ND_EtOverflowDrain, PS_Default)  # must subtract out of drain channel later
.
EtOverflowCoupling := CouplingSUBF(EtOverflowCoupling_Origin, [0; 270]*deg, ND_EtOverflowDrain, PS_Default, ["EtCon"])
EtOverflowTee := TeeF(EtOverflowTee_Origin, [90; 270; 0]*deg, ND_EtOverflowDrain, PS_Default)
EtOverflowCap1 := CapF(EtOverflowCap1_Origin, [90; 0]*deg, ND_EtOverflowDrain)
EtOverflowCap2 := CapF(EtOverflowCap2_Origin, [270; 0]*deg, ND_EtOverflowDrain)
EtOverflowFittingsFrz := FreezeLayer("EtOverflowDrainFittingsPlu")
EtOverflowCutaway := BoxF([W_EtOverflowSlot/1.5; CapThickness(ND_EtOverflowDrain); ConRadius(ND_EtOverflowDrain) + zc] + EtOverflowCap1_Origin, [
    -W_EtOverflowSlot/1.5;
    -CapThickness(ND_EtOverflowDrain);
    innerdiameter(ND_EtOverflowDrain, PS_Default)/2 - H_EtOverflowCutaway
] + EtOverflowCap2_Origin, [0; 0; 0]*deg)
EtOverflowFittingsSub := SubtractF(["EtOverflowDrainFittingsPlu"], "DeleteMe")
EtOverflowFittingsPlu := stack(EtOverflowFittingsLayer, EtOverflowElbow, EtOverflowCoupling, EtOverflowTee, EtOverflowCap1, EtOverflowCap2, EtOverflowFittingsFrz, EtOverflowCutaway, GroupDelete, EtOverflowFittingsSub)
EtOverflowPipesLayer := layer_new("EtOverflowDrainPlu", blue)
L_EtOverflowNipple := EtOverflowCoupling_Origin[2] - CouplingLength(ND_EtOverflowDrain) + 2*SocketDepth(ND_EtOverflowDrain) - EtOverflowElbow_Origin[2]
EtOverflowNipple := PipeSUBF(EtOverflowElbow_Origin, L_EtOverflowNipple, [0; 90]*deg, ND_EtOverflowDrain, PS_Default, ["EtCon"])
L_EtOverflowPipeVert1 := EtOverflowTee_Origin[2] - EtOverflowCoupling_Origin[2]
EtOverflowVertPipe := PipeF(EtOverflowCoupling_Origin, L_EtOverflowPipeVert1, [0; 90]*deg, ND_EtOverflowDrain, PS_Default)
L_EtOverflowHorizPipes := 0.5*(W_Et - 2*CapThickness(ND_EtOverflowDrain) - TeeLength(ND_EtOverflowDrain))
EtOverflowHorizPipe1 := PipeF(EtOverflowCap1_Origin, L_EtOverflowHorizPipes, [90; 0]*deg, ND_EtOverflowDrain, PS_Default)
EtOverflowHorizPipe2 := PipeF(EtOverflowCap2_Origin, L_EtOverflowHorizPipes, [270; 0]*deg, ND_EtOverflowDrain, PS_Default)
EtOverflowPipesFrz := FreezeLayer("EtOverflowDrainPlu")
EtOverflowPipesSub := SubtractF(["EtOverflowDrainPlu"], "DeleteMe")
EtOverflowPipesPlu := stack(EtOverflowPipesLayer, EtOverflowNipple, EtOverflowVertPipe, EtOverflowHorizPipe1, EtOverflowHorizPipe2, EtOverflowPipesFrz, EtOverflowCutaway, GroupDelete, EtOverflowPipesSub)
EtOverflowPluScript1 := stack(EtOverflowFittingsPlu, EtOverflowPipesPlu)
# Flow Control Drain Grit
L_EtFlowControlComponents := 2*MaleAdapterLength(ND_EtFlowControl) + ValveLength(ND_EtFlowControl) - 2*ValveSocket(ND_EtFlowControl) + SocketDepth(ND_EtFlowControl) + ElbowRadius(ND_EtFlowControl)
Z_EtFlowControl := max(Z_Walkway + ConRadius(ND_EtFlowControl), Et_Origin[2] - H_EtDC - T_PlantWall + ConRadius(ND_EtFlowControl) + 2*ElbowRadius(ND_EtFlowControl) + 2*SocketDepth(ND_EtFlowControl)) = 1.50735 m
EtFlowControlPipeLayer := layer_new("EtFlowControlPipePlu", blue)
L_EtFlowControlHorizPipe1 := SocketDepth(ND_EtFlowControl) + T_PlantWall
L_EtFlowControlHorizPipe2 := SocketDepth(ND_EtFlowControl) + T_PlantWall + 2*MaleAdapterLength(ND_EtFlowControl) + ValveLength(ND_EtFlowControl) - 2*ValveSocket(ND_EtFlowControl)
EtFlowControlHorizPipe1_Origin := [
    Et_Origin[0] + T_PlantWall + SocketDepth(ND_EtFlowControl);
    Et_Origin[1] + L_EtHopperFront + ConRadius(ND_EtDrain) + S_Fitting;
    Z_EtFlowControl
]
EtFlowControlHorizPipe1 := PipeSUBF(EtFlowControlHorizPipe1_Origin, L_EtFlowControlHorizPipe1, [0; 0; 0]*deg, ND_EtFlowControl, PS_Default, ["EtCon"])
EtFlowControlHorizPipe2 := PipeSUBF([
    Et_Origin[0] + L_EtFlowControlHorizPipe2;
    EtFlowControlHorizPipe1_Origin[1];
    min(Et_Origin[2] - T_PlantWall - ConRadius(ND_EtFlowControl), Z_EtFlowControl - 2*ElbowRadius(ND_EtFlowControl) - 2*SocketDepth(ND_EtFlowControl))
], L_EtFlowControlHorizPipe2, [0; 0; 0]*deg, ND_EtFlowControl, PS_Default, ["EtCon"])
EtFlowControlNipple1 := PipeF([
    Et_Origin[0] + T_PlantWall + SocketDepth(ND_EtFlowControl) + 2*MaleAdapterLength(ND_EtFlowControl) + ValveLength(ND_EtFlowControl) - 2*ValveSocket(ND_EtFlowControl);
    EtFlowControlHorizPipe1_Origin[1];
    Z_EtFlowControl
], 2*SocketDepth(ND_EtFlowControl), [0; 0; 0]*deg, ND_EtFlowControl, PS_Default)
L_EtFlowControlVert := Z_EtFlowControl - min(Et_Origin[2] - T_PlantWall - ConRadius(ND_EtFlowControl), Z_EtFlowControl - 2*ElbowRadius(ND_EtFlowControl) - 2*SocketDepth(ND_EtFlowControl)) - 2*ElbowRadius(ND_EtFlowControl) = 0.092 m
EtFlowControlVertPipe_Origin := [
    Et_Origin[0] + T_PlantWall + SocketDepth(ND_EtFlowControl) + 2*MaleAdapterLength(ND_EtFlowControl) + ValveLength(ND_EtFlowControl) - 2*ValveSocket(ND_EtFlowControl) + ElbowRadius(ND_EtFlowControl);
    EtFlowControlHorizPipe1_Origin[1];
    Z_EtFlowControl - ElbowRadius(ND_EtFlowControl)
]
EtFlowControlVertPipe := PipeF(EtFlowControlVertPipe_Origin, L_EtFlowControlVert, [0; 270]*deg, ND_EtFlowControl, PS_Default)
EtFlowControlFittingLayer := layer_new("EtFlowControlFittingPlu", green)
EtFlowControlElbow1 := ElbowF([
    EtFlowControlVertPipe_Origin[0] - ElbowRadius(ND_EtFlowControl);
    EtFlowControlHorizPipe1_Origin[1];
    min(Et_Origin[2] - T_PlantWall - ConRadius(ND_EtFlowControl), Z_EtFlowControl - 2*ElbowRadius(ND_EtFlowControl) - 2*SocketDepth(ND_EtFlowControl))
], [-90; 0; 90]*deg, ND_EtFlowControl, PS_Default)
EtFlowControlElbow2 := ElbowF([
    EtFlowControlVertPipe_Origin[0] - ElbowRadius(ND_EtFlowControl);
    EtFlowControlHorizPipe1_Origin[1];
    Z_EtFlowControl
], [-90; 0; -90]*deg, ND_EtFlowControl, PS_Default)
EtFlowControlAdapterLayer := layer_new("EtFlowControlAdapterPlu", blue3)
EtFlowControlAdapter1 := MaleAdapterF([EtFlowControlHorizPipe1_Origin[0]; EtFlowControlHorizPipe1_Origin[1]; Z_EtFlowControl], [180; 0]*deg, ND_EtFlowControl, PS_Default)
EtFlowControlAdapter2 := MaleAdapterF([
    Et_Origin[0] + T_PlantWall + 2*MaleAdapterLength(ND_EtFlowControl) + ValveLength(ND_EtFlowControl) - 2*ValveSocket(ND_EtFlowControl) - SocketDepth(ND_EtFlowControl);
    EtFlowControlHorizPipe1_Origin[1];
    Z_EtFlowControl
], [0; 0]*deg, ND_EtFlowControl, PS_Default)
EtFlowControlValveLayer := layer_new("EtFlowControlValvePlu", blue2)
EtFlowControlValve := insertdwg("https://confluence.cornell.edu/download/attachments/173604905/Et-Scaled-Gate-Valve-Threaded.dwg", [
    EtFlowControlHorizPipe1_Origin[0] - SocketDepth(ND_EtFlowControl) + MaleAdapterLength(ND_EtFlowControl) - ValveSocket(ND_EtFlowControl) + ValveLength(ND_EtFlowControl);
    EtFlowControlHorizPipe1_Origin[1];
    Z_EtFlowControl
], 2*outerradius(ND_EtFlowControl)/(1.16 m), 2*outerradius(ND_EtFlowControl)/(1.16 m), 0 deg)
FlowControlScript0 := stack(EtFlowControlPipeLayer, EtFlowControlHorizPipe1, EtFlowControlHorizPipe2, EtFlowControlNipple1, EtFlowControlVertPipe, FreezeLayer("EtFlowControlPipePlu"), EtFlowControlFittingLayer, EtFlowControlElbow1, EtFlowControlElbow2, FreezeLayer("EtFlowControlFittingPlu"), EtFlowControlAdapterLayer, EtFlowControlAdapter1, EtFlowControlAdapter2, FreezeLayer("EtFlowControlAdapterPlu"), EtFlowControlValveLayer, EtFlowControlValve, FreezeLayer("EtFlowControlValvePlu"))
# Flow Control Drain Grit Two Inlets
L_EtFlowControlComponents := 2*MaleAdapterLength(ND_EtFlowControl) + ValveLength(ND_EtFlowControl) - 2*ValveSocket(ND_EtFlowControl) + SocketDepth(ND_EtFlowControl) + ElbowRadius(ND_EtFlowControl)
Z_EtFlowControl := max(Z_Walkway + ConRadius(ND_EtFlowControl), Et_Origin[2] - H_EtDC - T_PlantWall + ConRadius(ND_EtFlowControl) + 2*ElbowRadius(ND_EtFlowControl) + 2*SocketDepth(ND_EtFlowControl)) = 1.50735 m
EtFlowControlPipeLayer := layer_new("EtFlowControlPipePlu", blue)
L_EtFlowControlHorizPipe1 := SocketDepth(ND_EtFlowControl) + T_PlantWall
L_EtFlowControlHorizPipe2 := SocketDepth(ND_EtFlowControl) + T_PlantWall + 2*MaleAdapterLength(ND_EtFlowControl) + ValveLength(ND_EtFlowControl) - 2*ValveSocket(ND_EtFlowControl)
EtFlowControlHorizPipe1_Origin :=
    if EN_TwoInlets == 1
        [
            Et_Origin[0] + T_PlantWall + SocketDepth(ND_EtFlowControl);
            Et_Origin[1] + L_EtHopperFront + ConRadius(ND_EtDrain) + S_Fitting;
            Z_EtFlowControl
        ]
    otherwise
        [
            Et_Origin[0] + T_PlantWall + SocketDepth(ND_EtFlowControl);
            Et_Origin[1] + L_EtHopperFront*5/4 + ConRadius(ND_EtDrain) + S_Fitting;
            Z_EtFlowControl
        ]
EtFlowControlHorizPipe1L_Origin := EtFlowControlHorizPipe1_Origin + [0 m; (2*S_Fitting + 2*T_EtRemovableWallSupport) + T_EtRemovableWall + 2*ConRadius(ND_EtDrain); 0 m]
EtFlowControlHorizPipe1 := PipeSUBF(EtFlowControlHorizPipe1_Origin, L_EtFlowControlHorizPipe1, [0; 0; 0]*deg, ND_EtFlowControl, PS_Default, ["EtCon"])
EtFlowControlHorizPipe1L := PipeSUBF(EtFlowControlHorizPipe1L_Origin, L_EtFlowControlHorizPipe1, [0; 0; 0]*deg, ND_EtFlowControl, PS_Default, ["EtCon"])
EtFlowControlHorizPipe2 := PipeSUBF([
    Et_Origin[0] + L_EtFlowControlHorizPipe2;
    EtFlowControlHorizPipe1_Origin[1];
    min(Et_Origin[2] - T_PlantWall - ConRadius(ND_EtFlowControl), Z_EtFlowControl - 2*ElbowRadius(ND_EtFlowControl) - 2*SocketDepth(ND_EtFlowControl))
], L_EtFlowControlHorizPipe2, [0; 0; 0]*deg, ND_EtFlowControl, PS_Default, ["EtCon"])
EtFlowControlHorizPipe2L := PipeSUBF([
    Et_Origin[0] + L_EtFlowControlHorizPipe2;
    EtFlowControlHorizPipe1L_Origin[1];
    min(Et_Origin[2] - T_PlantWall - ConRadius(ND_EtFlowControl), Z_EtFlowControl - 2*ElbowRadius(ND_EtFlowControl) - 2*SocketDepth(ND_EtFlowControl))
], L_EtFlowControlHorizPipe2, [0; 0; 0]*deg, ND_EtFlowControl, PS_Default, ["EtCon"])
EtFlowControlNipple1 := PipeF([
    Et_Origin[0] + T_PlantWall + SocketDepth(ND_EtFlowControl) + 2*MaleAdapterLength(ND_EtFlowControl) + ValveLength(ND_EtFlowControl) - 2*ValveSocket(ND_EtFlowControl);
    EtFlowControlHorizPipe1_Origin[1];
    Z_EtFlowControl
], 2*SocketDepth(ND_EtFlowControl), [0; 0; 0]*deg, ND_EtFlowControl, PS_Default)
EtFlowControlNipple1L := PipeF([
    Et_Origin[0] + T_PlantWall + SocketDepth(ND_EtFlowControl) + 2*MaleAdapterLength(ND_EtFlowControl) + ValveLength(ND_EtFlowControl) - 2*ValveSocket(ND_EtFlowControl);
    EtFlowControlHorizPipe1L_Origin[1];
    Z_EtFlowControl
], 2*SocketDepth(ND_EtFlowControl), [0; 0; 0]*deg, ND_EtFlowControl, PS_Default)
L_EtFlowControlVert := Z_EtFlowControl - min(Et_Origin[2] - T_PlantWall - ConRadius(ND_EtFlowControl), Z_EtFlowControl - 2*ElbowRadius(ND_EtFlowControl) - 2*SocketDepth(ND_EtFlowControl)) - 2*ElbowRadius(ND_EtFlowControl) = 0.092 m
EtFlowControlVertPipe_Origin := [
    Et_Origin[0] + T_PlantWall + SocketDepth(ND_EtFlowControl) + 2*MaleAdapterLength(ND_EtFlowControl) + ValveLength(ND_EtFlowControl) - 2*ValveSocket(ND_EtFlowControl) + ElbowRadius(ND_EtFlowControl);
    EtFlowControlHorizPipe1_Origin[1];
    Z_EtFlowControl - ElbowRadius(ND_EtFlowControl)
]
EtFlowControlVertPipe := PipeF(EtFlowControlVertPipe_Origin, L_EtFlowControlVert, [0; 270]*deg, ND_EtFlowControl, PS_Default)
EtFlowControlVertPipeL_Origin := [
    Et_Origin[0] + T_PlantWall + SocketDepth(ND_EtFlowControl) + 2*MaleAdapterLength(ND_EtFlowControl) + ValveLength(ND_EtFlowControl) - 2*ValveSocket(ND_EtFlowControl) + ElbowRadius(ND_EtFlowControl);
    EtFlowControlHorizPipe1L_Origin[1];
    Z_EtFlowControl - ElbowRadius(ND_EtFlowControl)
]
EtFlowControlVertPipeL := PipeF(EtFlowControlVertPipeL_Origin, L_EtFlowControlVert, [0; 270]*deg, ND_EtFlowControl, PS_Default)
EtFlowControlFittingLayer := layer_new("EtFlowControlFittingPlu", green)
EtFlowControlElbow1 := ElbowF([
    EtFlowControlVertPipe_Origin[0] - ElbowRadius(ND_EtFlowControl);
    EtFlowControlHorizPipe1_Origin[1];
    min(Et_Origin[2] - T_PlantWall - ConRadius(ND_EtFlowControl), Z_EtFlowControl - 2*ElbowRadius(ND_EtFlowControl) - 2*SocketDepth(ND_EtFlowControl))
], [-90; 0; 90]*deg, ND_EtFlowControl, PS_Default)
EtFlowControlElbow2 := ElbowF([
    EtFlowControlVertPipe_Origin[0] - ElbowRadius(ND_EtFlowControl);
    EtFlowControlHorizPipe1_Origin[1];
    Z_EtFlowControl
], [-90; 0; -90]*deg, ND_EtFlowControl, PS_Default)
EtFlowControlElbow1L := ElbowF([
    EtFlowControlVertPipe_Origin[0] - ElbowRadius(ND_EtFlowControl);
    EtFlowControlHorizPipe1L_Origin[1];
    min(Et_Origin[2] - T_PlantWall - ConRadius(ND_EtFlowControl), Z_EtFlowControl - 2*ElbowRadius(ND_EtFlowControl) - 2*SocketDepth(ND_EtFlowControl))
], [-90; 0; 90]*deg, ND_EtFlowControl, PS_Default)
EtFlowControlElbow2L := ElbowF([
    EtFlowControlVertPipe_Origin[0] - ElbowRadius(ND_EtFlowControl);
    EtFlowControlHorizPipe1L_Origin[1];
    Z_EtFlowControl
], [-90; 0; -90]*deg, ND_EtFlowControl, PS_Default)
EtFlowControlAdapterLayer := layer_new("EtFlowControlAdapterPlu", blue3)
EtFlowControlAdapter1 := MaleAdapterF([EtFlowControlHorizPipe1_Origin[0]; EtFlowControlHorizPipe1_Origin[1]; Z_EtFlowControl], [180; 0]*deg, ND_EtFlowControl, PS_Default)
EtFlowControlAdapter2 := MaleAdapterF([
    Et_Origin[0] + T_PlantWall + 2*MaleAdapterLength(ND_EtFlowControl) + ValveLength(ND_EtFlowControl) - 2*ValveSocket(ND_EtFlowControl) - SocketDepth(ND_EtFlowControl);
    EtFlowControlHorizPipe1_Origin[1];
    Z_EtFlowControl
], [0; 0]*deg, ND_EtFlowControl, PS_Default)
EtFlowControlAdapter1L := MaleAdapterF([EtFlowControlHorizPipe1_Origin[0]; EtFlowControlHorizPipe1L_Origin[1]; Z_EtFlowControl], [180; 0]*deg, ND_EtFlowControl, PS_Default)
EtFlowControlAdapter2L := MaleAdapterF([
    Et_Origin[0] + T_PlantWall + 2*MaleAdapterLength(ND_EtFlowControl) + ValveLength(ND_EtFlowControl) - 2*ValveSocket(ND_EtFlowControl) - SocketDepth(ND_EtFlowControl);
    EtFlowControlHorizPipe1L_Origin[1];
    Z_EtFlowControl
], [0; 0]*deg, ND_EtFlowControl, PS_Default)
EtFlowControlValveLayer := layer_new("EtFlowControlValvePlu", blue2)
EtFlowControlValve := insertdwg("https://confluence.cornell.edu/download/attachments/173604905/Et-Scaled-Gate-Valve-Threaded.dwg", [
    EtFlowControlHorizPipe1_Origin[0] - SocketDepth(ND_EtFlowControl) + MaleAdapterLength(ND_EtFlowControl) - ValveSocket(ND_EtFlowControl) + ValveLength(ND_EtFlowControl);
    EtFlowControlHorizPipe1_Origin[1];
    Z_EtFlowControl
], 2*outerradius(ND_EtFlowControl)/(1.16 m), 2*outerradius(ND_EtFlowControl)/(1.16 m), 0 deg)
EtFlowControlValveL := insertdwg("https://confluence.cornell.edu/download/attachments/173604905/Et-Scaled-Gate-Valve-Threaded.dwg", [
    EtFlowControlHorizPipe1_Origin[0] - SocketDepth(ND_EtFlowControl) + MaleAdapterLength(ND_EtFlowControl) - ValveSocket(ND_EtFlowControl) + ValveLength(ND_EtFlowControl);
    EtFlowControlHorizPipe1L_Origin[1];
    Z_EtFlowControl
], 2*outerradius(ND_EtFlowControl)/(1.16 m), 2*outerradius(ND_EtFlowControl)/(1.16 m), 0 deg)
FlowControlScript2 :=
    stack(EtFlowControlPipeLayer, EtFlowControlHorizPipe1, EtFlowControlHorizPipe2, EtFlowControlNipple1, EtFlowControlVertPipe, FreezeLayer("EtFlowControlPipePlu"), EtFlowControlFittingLayer, EtFlowControlElbow1, EtFlowControlElbow2, FreezeLayer("EtFlowControlFittingPlu"), EtFlowControlAdapterLayer, EtFlowControlAdapter1, EtFlowControlAdapter2, FreezeLayer("EtFlowControlAdapterPlu"), EtFlowControlValveLayer, EtFlowControlValve, FreezeLayer("EtFlowControlValvePlu")) if EN_TwoInlets == 0
    stack(EtFlowControlPipeLayer, EtFlowControlHorizPipe1, EtFlowControlHorizPipe1L, EtFlowControlHorizPipe2, EtFlowControlHorizPipe2L, EtFlowControlNipple1, EtFlowControlNipple1L, EtFlowControlVertPipe, EtFlowControlVertPipeL, FreezeLayer("EtFlowControlPipePlu"), EtFlowControlFittingLayer, EtFlowControlElbow1, EtFlowControlElbow1L, EtFlowControlElbow2, EtFlowControlElbow2L, FreezeLayer("EtFlowControlFittingPlu"), EtFlowControlAdapterLayer, EtFlowControlAdapter1, EtFlowControlAdapter1L, EtFlowControlAdapter2, EtFlowControlAdapter2L, FreezeLayer("EtFlowControlAdapterPlu"), EtFlowControlValveLayer, EtFlowControlValve, EtFlowControlValveL, FreezeLayer("EtFlowControlValvePlu")) otherwise
EtFlowControlCoupling_Origin := [-L_Et - SocketDepth(ND_EtFlowControl); ConRadius(ND_EtFlowControl); 0] + Et_Origin
L_EtFlowControlPipe := max(T_PlantWall - CouplingLength(ND_EtFlowControl), 0) + 2*SocketDepth(ND_EtFlowControl) + S_Fitting
EtFlowControlAdapter1_Origin := [-L_EtFlowControlPipe + SocketDepth(ND_EtFlowControl); 0; 0] + EtFlowControlCoupling_Origin
EtFlowControlValve_Origin := [
    -MaleAdapterLength(ND_EtFlowControl) + SocketDepth(ND_EtFlowControl) + ValveSocket(ND_EtFlowControl);
    0;
    0
] + EtFlowControlAdapter1_Origin
EtFlowControlAdapter2_Origin := [
    -ValveLength(ND_EtFlowControl) + ValveSocket(ND_EtFlowControl) - MaleAdapterLength(ND_EtFlowControl) + SocketDepth(ND_EtFlowControl);
    0;
    0
] + EtFlowControlValve_Origin
EtFlowControlElbow_Origin := [-2*SocketDepth(ND_EtFlowControl); 0; 0] + EtFlowControlAdapter2_Origin
EtFlowControlFittingLayer := layer_new("EtFlowControlFittingPlu", green)
EtFlowControlCoupling := CouplingSUBF(EtFlowControlCoupling_Origin, [0; 0], ND_EtFlowControl, PS_Default, ["EtCon"])
EtFlowControlAdapter1 := MaleAdapterF(EtFlowControlAdapter1_Origin, [0; 0], ND_EtFlowControl, PS_Default)
EtFlowControlValve := insertdwg("https://confluence.cornell.edu/download/attachments/173604905/Et-Scaled-Gate-Valve-Threaded.dwg", EtFlowControlValve_Origin, 2*outerradius(ND_EtFlowControl)/(1.16 m), 2*outerradius(ND_EtFlowControl)/(1.16 m), 0 deg)
EtFlowControlAdapter2 := MaleAdapterF(EtFlowControlAdapter2_Origin, [180; 0]*deg, ND_EtFlowControl, PS_Default)
EtFlowControlElbow := ElbowF(EtFlowControlElbow_Origin, [90; 0; 90]*deg, ND_EtFlowControl, PS_Default)
EtFlowControlFittingsFrz := FreezeLayer("EtFlowControlFittingsPlu")
EtFlowControlFittings :=
    stack(EtFlowControlFittingLayer, EtFlowControlCoupling, EtFlowControlAdapter1, EtFlowControlValve, EtFlowControlFittingsFrz) if Z_Walkway ≤ Z_Et
    stack(EtFlowControlFittingLayer, EtFlowControlCoupling, EtFlowControlAdapter1, EtFlowControlValve, EtFlowControlAdapter2, EtFlowControlElbow, EtFlowControlFittingsFrz) otherwise
EtFlowControlPipeLayer := layer_new("EtFlowControlPipePlu", blue)
EtFlowControlPipe := PipeSUBF(EtFlowControlCoupling_Origin + [-CouplingLength(ND_EtFlowControl) + 2*SocketDepth(ND_EtFlowControl); 0; 0], L_EtFlowControlPipe, [0; 0], ND_EtFlowControl, PS_Default, ["EtCon"])
L_EtFlowControlNipple := 2*SocketDepth(ND_EtFlowControl)
EtFlowControlNipple := PipeF(EtFlowControlAdapter2_Origin, L_EtFlowControlNipple, [0; 0], ND_EtFlowControl, PS_Default)
L_EtFlowControlVertPipe := Z_Et - Z_Walkway + SocketDepth(ND_EtFlowControl)
EtFlowControlVertPipe := PipeF(EtFlowControlElbow_Origin + [-ElbowRadius(ND_EtFlowControl); 0; -ElbowRadius(ND_EtFlowControl)], L_EtFlowControlVertPipe, [0; 90]*deg, ND_EtFlowControl, PS_Default)
EtFlocControlPipeFrz := FreezeLayer("EtFlowControlPipePlu")
EtFlowControlPipes :=
    stack(EtFlowControlPipeLayer, EtFlowControlPipe, EtFlocControlPipeFrz) if Z_Walkway ≤ Z_Et
    stack(EtFlowControlPipeLayer, EtFlowControlPipe, EtFlowControlNipple, EtFlowControlVertPipe, EtFlocControlPipeFrz) otherwise
FlowControlScript1 := stack(EtFlowControlFittings, EtFlowControlPipes)
# Flow Control Drain No Grit
# Inlet Pipe
EtInletElbow_Origin0 := Et_Origin + [
    0 m;
    L_EtFrontToOverflowWeir + ConRadius(ND_EtOverflowDrain) + S_Fitting + ConRadius(ND_EtInlet);
    H_Et + ConRadius(ND_EtInlet)
]
EtInletElbow_Origin1 := Et_Origin + [
    ElbowRadius(ND_EtInlet) - S_Fitting - ConRadius(ND_EtInlet);
    0.5*W_Et;
    H_Et + ConRadius(ND_EtInlet) + ElbowRadius(ND_EtInlet) - SocketDepth(ND_EtInlet)
]
EtInletElbow_Origin :=
    EtInletElbow_Origin0 if EN_EtGrit == 0
    EtInletElbow_Origin1 otherwise
EtInletPipeLayer := layer_new("EtInletPipePlu", blue)
EtInletFittingLayer := layer_new("EtInletFittingPlu", green)
ND_EtInlet = 0.1016 m
EtInletElbow := ElbowF(EtInletElbow_Origin, [90; 0; 90]*deg, ND_EtInlet, PS_Default)
L_EtInletPipe := 1 m
EtInletPipe := PipeF(EtInletElbow_Origin + [L_EtInletPipe; 0; 0], L_EtInletPipe, [0; 0; 0]*deg, ND_EtInlet, PS_Default)
FreezeEtInletPipe := FreezeLayer("EtInletPipePlu")
FreezeEtInletFittings := FreezeLayer("EtInletFittingPlu")
EtInletScript := stack(EtInletFittingLayer, EtInletElbow, FreezeEtInletFittings, EtInletPipeLayer, EtInletPipe, FreezeEtInletPipe)
# Inlet Pipe Two Inlets
# Need to incorporate this into "inlet pipe" under condition for 2 inlet pipes
EtInletElbow_Origin0 := Et_Origin + [
    0 m;
    L_EtFrontToOverflowWeir + ConRadius(ND_EtOverflowDrain) + S_Fitting + ConRadius(ND_EtInlet);
    H_Et + ConRadius(ND_EtInlet)
]
EtInletElbow_Origin0 := Et_Origin + [
    0 m;
    L_EtHopperFront + 4*ConRadius(ND_EtDrain) + 4*S_Fitting + ConRadius(ND_EtInlet) + T_EtRemovableWall + 2*T_EtRemovableWallSupport;
    H_Et + ConRadius(ND_EtInlet)
]
# Starts after flat on bottom of hopper on back side
# New Back Inlet Origin
# No longer involves OFW
EtInletElbow_Origin1 := Et_Origin + [
    ElbowRadius(ND_EtInlet) - S_Fitting - ConRadius(ND_EtInlet);
    0.5*W_Et;
    H_Et + ConRadius(ND_EtInlet) + ElbowRadius(ND_EtInlet) - SocketDepth(ND_EtInlet)
]
EtInletElbow_Origin :=
    EtInletElbow_Origin0 if EN_EtGrit == 0
    EtInletElbow_Origin1 otherwise
EtInletElbow2_Origin := Et_Origin + [
    0 m;
    (ConRadius(ND_EtOverflowDrain) + S_Fitting + ConRadius(ND_EtInlet));
    H_Et + ConRadius(ND_EtInlet)
]
# New Front Inlet Origin
EtInletElbow2_Origin := Et_Origin + [0 m; L_EtHopperFront + (-ConRadius(ND_EtOverflowDrain)); H_Et + ConRadius(ND_EtInlet)]
EtInletPipeLayer := layer_new("EtInletPipePlu", blue)
EtInletFittingLayer := layer_new("EtInletFittingPlu", green)
ND_EtInlet = 0.1016 m
EtInletElbow := ElbowF(EtInletElbow_Origin, [90; 0; 90]*deg, ND_EtInlet, PS_Default)
EtInletElbow2 := ElbowF(EtInletElbow2_Origin, [90; 0; 90]*deg, ND_EtInlet, PS_Default)
L_EtInletPipe := 1 m
EtInletPipe := PipeF(EtInletElbow_Origin + [L_EtInletPipe; 0; 0], L_EtInletPipe, [0; 0; 0]*deg, ND_EtInlet, PS_Default)
EtInletPipe2 := PipeF(EtInletElbow2_Origin + [L_EtInletPipe; 0; 0], L_EtInletPipe, [0; 0; 0]*deg, ND_EtInlet, PS_Default)
FreezeEtInletPipe := FreezeLayer("EtInletPipePlu")
FreezeEtInletFittings := FreezeLayer("EtInletFittingPlu")
EtInletScript2 := stack(EtInletFittingLayer, EtInletElbow, EtInletElbow2, FreezeEtInletFittings, EtInletPipeLayer, EtInletPipe, EtInletPipe2, FreezeEtInletPipe)
# Add Water Levels
EtWaterLayer := layer_new("EtWater", blue2)
EtWater := BoxF(Et_Origin, [Et_Origin[0] - L_Et; Et_Origin[1] + W_Et; ZW_Et], [0; 0; 0]*deg)
EtRMPipeWater := CylinderF(RMElbow_Origin + [0; ElbowRadius(ND_RMPipe); ElbowRadius(ND_RMPipe)], innerdiameter(ND_RMPipe, PS_Default)/2, ZW_RMPipe - RMElbow_Origin[2] - ElbowRadius(ND_RMPipe), [0; 90]*deg)
EtWaterFrz := FreezeLayer("EtWater")
EtWaterScript := stack(EtWaterLayer, EtWater, EtRMPipeWater, EtWaterFrz)
AC_EntranceTank :=
    stack(EtTankScript, EtTrashRackScript, EtOverflowPluScript0, EtDrainsRight, RMScript, FlowControlScript0, EtInletScript) if EN_EtGrit == 0 and EN_TwoInlets == 0
    stack(EtTankScript2, EtTrashRackScript, EtOverflowPluScript2, EtDrainsRight, RMScript, FlowControlScript2, EtInletScript2) if EN_EtGrit == 0 and EN_TwoInlets == 1
    stack(EtTankScript, EtOverflowPluScript1, RMScript, FlowControlScript1, EtInletScript) if EN_EtGrit == 1 and EN_TwoInlets == 0
AC_EntranceTankWater := stack(EtTankScript, EtTrashRackScript, EtOverflowPluScript0, EtDrainsRight, RMScript, FlowControlScript0, EtInletScript, EtWaterScript)
ACStart := stack(EtTankScript, EtTrashRackScript, EtOverflowPluScript0, EtDrainsRight, RMScript, FlowControlScript0, EtInletScript)
AC_EntranceTank :=
    AC_EntranceTank if EN_Water == 0
    AC_EntranceTankWater otherwise
# [component: inputs ACStart]
ACDraw := stack(EtTankScript2, EtTrashRackScript, EtOverflowPluScript2, EtDrainsRight, RMScript, FlowControlScript2, EtInletScript2)
# [component: inputs ACDraw]
