Q_Plant := 50*L/s
# [reference: ExpertInputs.xmcd]
# [reference: MathFunctions.xmcd]
# [reference: PipeDatabase.xmcd]
# [reference: FluidsFunctions.xmcd]
# [reference: SedimentationTank.xmcd]
# [reference: Flocculator.xmcd]
# [reference: LFOMvlk24.xmcd]
# [reference: EntranceTankvlk24.xmcd]
# [reference: StackedRapidSandFilter.xmcd]
# [reference: LinearCdc.xmcd]
# [reference: ChemStorageTanks.xmcd]
# AutoCAD drawing programs:
2*(H_EtHopperMax/tan(AN_EtSlopeMax) + ConRadius(ND_EtDrain) + S_Fitting) = 2.8016 m
# Translators:
# These are the codes that take MathCAD outputs and create AutoCAD scripts that are used to draw the plant (formerly Basics)
L_EtHopperMin = 1.2016 m
# [reference: MtoATranslators.xmcd]
(L_EtMax - mod(EN_LfomPipe + 4, 3)*(ConRadius(ND_EtDrain) + S_Fitting + T_EtHopperLedge) - L_LfomChannel*mod(EN_LfomPipe + 1, 2))/2 = 3.97839 m
# The wrapped MtoA translator contains the functions that the user will want to access. These functions will draw pieces with full functionality - specifying the location, dimension, and orientation of the object. Also, it contains layer control and subtraction capabilities for grouped objects.
# [reference: MtoATranslatorsWrapped.xmcd]
# Drawing functions:
# [reference: ChannelF.xmcd]
# [reference: PlumbingF.xmcd]
# [reference: TankF.xmcd]
# [reference: StairsF.xmcd]
# [reference: DrainChannelF.xmcd]
# AutoCAD Script Files:
# [reference: FlocculatorAC.xmcd]
# [reference: SedimentationTankAC.xmcd]
EN_LfomPipe = 0
# Changes for high flow highlighted in yellow
# Entrance Tank AutoCAD
# Entrance Tank Concrete
# Origins and dimensions
Et_Origin := [
    Plant_Origin[0] - L_Sed + L_Et;
    Floc_Origin[1] + (N_FlocChannels*(W_FlocChannel + T_PlantWall)) + W_EtWalkway + T_PlantWall;
    Z_Et
] = [-1.01356; 10.8757; 1.52045] m
Et_Dim := [L_Et; W_Et; H_Et] = [8.23357; 1.03896; 1.1268] m
EtHopper_Origin := [
    Et_Origin[0] - S_Fitting - ConRadius(ND_EtDrain) - L_EtHopper/2 - T_EtHopperLedge;
    Et_Origin[1] + W_Et;
    Et_Origin[2]
] = [-2.19197; 11.9147; 1.52045] m
Hopper_FarCorner := [Et_Origin[0] - L_EtHopper - T_EtHopperLedge; Et_Origin[1]; Z_EtHopper] = [-3.01877; 10.8757; 2.34726] m
HopperBack_FarCorner := [
    Et_Origin[0] - W_Et + 2*(S_Fitting + ConRadius(ND_EtDrain));
    Et_Origin[1] + L_Et - L_LfomChannel*mod(EN_LfomPipe + 1, 2) + W_Et;
    Et_Origin[2] + H_EtHopperBack
] = [-1.85093; 19.1087; 2.34726] m
EtDC_Origin := Et_Origin + [-L_EtDC; 0 m; -T_PlantWall]
# Hoppers and tank walls
EntTankLayer := layer_new("EtCon", grey)
EtHopper := WedgeF(EtHopper_Origin, Hopper_FarCorner, [0; 0; 0]*deg)
MirrorEtHopper := MirrorLast([EtHopper_Origin[0] + T_EtHopperLedge/2; EtHopper_Origin[1]], [EtHopper_Origin[0] + T_EtHopperLedge/2; EtHopper_Origin[1] + zc], "n")
EtHopperLedge := BoxF(EtHopper_Origin, EtHopper_Origin + [T_EtHopperLedge; -W_Et; H_EtHopper], [0; 0; 0]*deg)
ArrayEtHoppers := array_all(1, N_EtFullHopper + 1, -L_EtHopper - T_EtHopperLedge)
EtHopperBack := WedgeF(Et_Origin + [0; W_Et; 0], HopperBack_FarCorner, [90; 0; 0]*deg)
EntTank := Tank(Et_Origin, Et_Dim, T_PlantWall)
# Drain channel
EtDC := DrainChannelF(EtDC_Origin + [0 m; W_EtDC; 0 m], [180; 0; 0]*deg, Q_EtDCMax, W_EtDC, H_EtDC, L_EtDC, 1 %, Nu_Water, E_Concrete, 1)
FreezeEntTank := FreezeLayer("EtCon")
# Trash rack slots
TrashRackSlot1 := BoxF(EtHopper_Origin + [T_EtHopperLedge/2 - T_ConcreteMin/2; 2*D_Rebar; H_EtHopper - 2*D_Rebar], EtHopper_Origin + [
    T_EtHopperLedge/2 - T_ConcreteMin/2 - 2*D_Rebar;
    -W_Et - 2*D_Rebar;
    H_EtHopper + H_EtTop + H_PlantFreeboard + zc
], [0; 0; 0]*deg)
TrashRackSlot2 := BoxF(EtHopper_Origin + [T_EtHopperLedge/2 + T_ConcreteMin/2; 2*D_Rebar; H_EtHopper - 2*D_Rebar], EtHopper_Origin + [
    T_EtHopperLedge/2 + T_ConcreteMin/2 + 2*D_Rebar;
    -W_Et - 2*D_Rebar;
    H_EtHopper + H_EtTop + H_PlantFreeboard + zc
], [0; 0; 0]*deg)
SubtractTrashRackSlots := SubtractF(["EtCon"], "DeleteMe")
EtTankScript := stack(EntTankLayer, EtHopper, MirrorEtHopper, EtHopperLedge, ArrayEtHoppers, EtHopperBack, EntTank, EtDC, Union_All, FreezeEntTank, TrashRackSlot1, TrashRackSlot2, GroupDelete, SubtractTrashRackSlots)
# Trash Rack
TRLayer := layer_new("EtTrashrack", yellow)
HorizCylinder := CylinderF(EtHopper_Origin + [T_EtHopperLedge/2 - T_ConcreteMin/2 - D_Rebar/2; 2*D_Rebar; H_EtHopper - 3/2*D_Rebar], D_Rebar/2, W_Et + 4*D_Rebar, [90; 0]*deg)
ViewRight := view("r")
ArrayHorizCylinder := ArrayLast(N_TRSpacesH + 1, 1, B_EtRebar)
ViewTop := view("t")
VertCylinder := CylinderF(EtHopper_Origin + [T_EtHopperLedge/2 - T_ConcreteMin/2 - 3*D_Rebar/2; 3/2*D_Rebar; H_EtHopper - 2*D_Rebar], D_Rebar/2, (N_TRSpacesH + 1)*B_EtRebar - D_Rebar, [0; 90]*deg)
ArrayVertCyl := ArrayLast(1, N_TRSpacesV + 1, -B_EtRebar)
ArrayAll := array_all(1, 2, T_ConcreteMin + 2*D_Rebar)
Freeze := FreezeLayer("EtTrashrack")
EtTrashRackScript := stack(TRLayer, HorizCylinder, ViewRight, ArrayHorizCylinder, ViewTop, VertCylinder, ViewRight, ArrayVertCyl, ViewTop, ArrayAll, Freeze)
# Rapid Mix Pipe, LFOM, and Orifice Plate
# this is the upper elbow (connected to the LFOM)
RMElbow_Origin := [
    Plant_Origin[0] - L_Sed + S_Fitting + ConRadius(ND_RMPipe);
    Et_Origin[1] + W_Et - S_Fitting - ConRadius(ND_RMPipe) - ElbowRadius(ND_RMPipe);
    FlocCoupling_Origin[2]
]
L_RMPipeHoriz := (Et_Origin[1] + W_Et - S_Fitting - ConRadius(ND_RMPipe) - ElbowRadius(ND_RMPipe)) - (Floc_Origin[1] + N_FlocChannels*W_FlocChannel + (N_FlocChannels - 1)*T_PlantWall - L_FlocCouplingExt + CouplingLength(ND_RMPipe) - SocketDepth(ND_RMPipe)) = 1.45566 m
L_RMPipeVert := Z_EtTop - (RMElbow_Origin[2] + ElbowRadius(ND_RMPipe)) = 1.83526 m
L_RMAirRelease := Floc_Origin[2] + H_Floc - (FlocCoupling_Origin[2] + innerdiameter(ND_RMPipe, PS_Default)/2 - zc)
# RM Elbow
RMElbowLayer := layer_new("EtRmElbowPlu", green)
RMElbow := ElbowSUBF(RMElbow_Origin, [0; 90; 0]*deg, ND_RMPipe, PS_Default, ["EtCon"])
FreezeRMElbow := FreezeLayer("EtRmElbowPlu")
# RM Pipes
RMPipeLayer := layer_new("EtRmPipePlu", blue)
RMVertPipe := PipeSUBF([
    RMElbow_Origin[0];
    RMElbow_Origin[1] + ElbowRadius(ND_RMPipe);
    RMElbow_Origin[2] + ElbowRadius(ND_RMPipe)
], L_RMPipeVert, [0; 90; 0]*deg, ND_RMPipe, PS_Default, ["EtCon"])
RMHorizPipe := PipeF(RMElbow_Origin, L_RMPipeHoriz, [90; 0; 0]*deg, ND_RMPipe, PS_Default)
RMAirRelease := PipeF([
    RMElbow_Origin[0];
    RMElbow_Origin[1] - L_RMPipeHoriz + SocketDepth(ND_RMPipe) + S_Fitting + outerradius(ND_RMAirRelease);
    FlocCoupling_Origin[2] + innerdiameter(ND_RMPipe, PS_Default)/2 - zc
], L_RMAirRelease, [0; 90; 0]*deg, ND_RMAirRelease, PS_Default)
RMAirReleaseHole := CylinderF([
    RMElbow_Origin[0];
    RMElbow_Origin[1] - L_RMPipeHoriz + SocketDepth(ND_RMPipe) + S_Fitting + outerradius(ND_RMAirRelease);
    FlocCoupling_Origin[2]
], outerradius(ND_RMAirRelease), outerradius(ND_RMPipe) + zc, [0; 90; 0]*deg)
FreezeRMPipe := FreezeLayer("EtRmPipePlu")
SelectRMPipes := SelectLayer("EtRmPipePlu")
# LFOM Orifices
LfomOrifices :=
    Local ← FreezeRMPipe
    for h ∈ 0 .. last(H_LfomOrifices)
        if N_LfomOrifices[h] ≠ 0
            Local ← stack(Local, CylinderF([
                RMElbow_Origin[0];
                RMElbow_Origin[1] + ElbowRadius(ND_RMPipe);
                ZW_Et - HL_Flowmeasure + H_LfomOrifices[h]
            ], D_LfomOrifices/2, outerradius(ND_RMPipe) + zc, [
                90 deg + (asin(0.5*S_LfomOrificesMin/(2*outerradius(ND_RMPipe))) + asin(D_LfomOrifices/(2*outerradius(ND_RMPipe))))*(mod(h, 2) == 0);
                0 deg
            ]))
        if N_LfomOrifices[h] > 1
            Local ← stack(Local, ArrayLastPolar([
                RMElbow_Origin[0];
                RMElbow_Origin[1] + ElbowRadius(ND_RMPipe);
                ZW_Et - HL_Flowmeasure + H_LfomOrifices[h]
            ], N_LfomOrifices[h], (N_LfomOrifices[h] - 1)*(2*asin(D_LfomOrifices/(2*outerradius(ND_RMPipe))) + 2*asin(S_LfomOrificesMin/(2*outerradius(ND_RMPipe))))))
    return Local
SubtractRMPipeOrifices := SubtractF(["EtRmPipePlu"], "DeleteMe")
RMScript := stack(RMElbowLayer, RMElbow, FreezeRMElbow, RMPipeLayer, RMVertPipe, RMHorizPipe, FreezeRMPipe, RMAirReleaseHole, GroupDelete, SubtractRMPipeOrifices, SelectRMPipes, RMAirRelease, LfomOrifices, GroupDelete, SubtractRMPipeOrifices)
# High Flow LFOM Sheet and Channel
T_LfomChannelWall := T_ChannelWall
LfomChannel_Origin := [Et_Origin[0] - L_Et + L_LfomChannel; Et_Origin[1]; Z_LfomChannelBottom] = [-8.20758; 10.8757; 2.0796] m
T_LfomSheet := T_ConcreteMin
LfomChannel_Dim := [L_LfomChannel; W_LfomChannel; H_LfomChannel] = [1.03955; 0.452425; 0.567657] m
RMChannel_Origin := [Et_Origin[0] - L_Et + W_RMChannel; Et_Origin[1] - T_PlantWall - L_RMChannel; Z_RMChannelBottom]  # error: This variable is undefined.
RMChannel_Dim := [W_RMChannel; L_RMChannel; H_RMChannel]  # error: This variable is undefined.
LfomSheet_Origin := LfomChannel_Origin + [0 m; W_LfomChannel + 0.5*(T_ChannelWall - T_LfomSheet); -T_ConcreteMin]
LfomSheet_Dim := [-L_LfomChannel; T_LfomSheet; H_LfomChannel + T_ConcreteMin]
SelectEtCon := SelectLayer("EtCon")
LfomChannel := Tank(LfomChannel_Origin, LfomChannel_Dim, T_ChannelWall)
LfomChannelFill := BoxF(LfomChannel_Origin + [T_ChannelWall; 0 m; 0 m], LfomChannel_Origin + [-L_LfomChannel; W_LfomChannel + T_ChannelWall; -H_Et + H_LfomChannel], [0; 0; 0]*deg)
RMChannel := Tank(RMChannel_Origin, RMChannel_Dim, T_LfomChannelWall)  # error: This variable is undefined.
FreezeEntTank := FreezeLayer("EtCon")
ChannelSubtraction := BoxF(LfomChannel_Origin + [-L_LfomChannel; 0 m; 0 m], LfomChannel_Origin + [-L_LfomChannel + W_RMChannel; -T_PlantWall; H_LfomChannel], [0; 0; 0]*deg)
SlopeSubtraction := BoxF(LfomChannel_Origin, LfomChannel_Origin + [-L_LfomChannel; W_LfomChannel; H_LfomChannel], [0; 0; 0]*deg)
LfomSheetSubtraction := BoxF(LfomChannel_Origin + [-T_ConcreteMin; W_LfomChannel; 0 m], LfomChannel_Origin + [-L_LfomChannel + T_ConcreteMin; W_LfomChannel + T_ChannelWall; H_LfomChannel], [0; 0; 0]*deg)
LfomSheetSlotSubtraction := BoxF(LfomChannel_Origin + [0 m; W_LfomChannel + 0.5*(T_ChannelWall - T_LfomSheet); -T_ConcreteMin], LfomChannel_Origin + [-L_LfomChannel; W_LfomChannel + 0.5*(T_ChannelWall + T_LfomSheet); H_LfomChannel], [0; 0; 0]*deg)
# GroupDelete
ChannelSubtractions := SubtractF(["EtCon"], "DeleteMe")
LfomSheetLayer := layer_new("LfomSheet", ltpurple)
LfomSheet := BoxF(LfomSheet_Origin, LfomSheet_Origin + LfomSheet_Dim, [0; 0; 0]*deg)
FrzLfomSheetLayer := FreezeLayer("LfomSheet")
LfomOrifices :=
    Local ← FrzLfomSheetLayer
    for h ∈ 0 .. last(H_LfomOrifices)
        if N_LfomOrifices[h] ≠ 0
            Local ← stack(Local, CylinderF([
                (LfomSheet_Origin[0] - T_ConcreteMin - 0.5*(D_LfomOrifices + S_LfomOrificesMin)) - 0.5*(S_LfomOrificesMin + D_LfomOrifices)*(mod(h, 2) == 0);
                LfomSheet_Origin[1];
                Z_LfomChannelBottom + HW_LfomChannel + H_Freefall + H_LfomOrifices[h]
            ], D_LfomOrifices/2, T_LfomSheet + zc, [-90; 0]*deg))
        Local ← stack(Local, ArrayLast(1, N_LfomOrifices[h], -(D_LfomOrifices + S_LfomOrificesMin))) if N_LfomOrifices[h] > 1
    return Local
# GroupDelete
SubtractLfomOrifices := SubtractF(["LfomSheet"], "DeleteMe")
LfomSheetLayer := layer_new("LfomSheet", ltpurple)
LfomChannelScript := stack(SelectEtCon, LfomChannel, LfomChannelFill, FreezeEntTank, SlopeSubtraction, LfomSheetSubtraction, LfomSheetSlotSubtraction, GroupDelete, ChannelSubtractions, LfomSheetLayer, LfomSheet, LfomOrifices, GroupDelete, SubtractLfomOrifices)
# High Flow Rapid Mix Plumbing
RMVertCouplingHF_Origin := [
    FlocCoupling_Origin[0];
    Et_Origin[1] + S_Fitting + ConRadius(ND_RMPipeHF);
    Z_LfomChannelBottom - CouplingLength(ND_RMPipeHF) + SocketDepth(ND_RMPipeHF)
]
RMHorizPipeHF_Origin := [
    FlocCoupling_Origin[0];
    Et_Origin[1] + S_Fitting + ConRadius(ND_RMPipeHF) - ElbowRadius(ND_RMPipeHF);
    FlocCoupling_Origin[2]
]
L_RMPipeHorizHF := (Et_Origin[1] + S_Fitting + ConRadius(ND_RMPipeHF)) - ElbowRadius(ND_RMPipeHF) - (Floc_Origin[1] + N_FlocChannels*W_FlocChannel + (N_FlocChannels - 1)*T_PlantWall - L_FlocCouplingExt + CouplingLength(ND_RMPipeHF) - SocketDepth(ND_RMPipeHF)) = 1.06609 m
L_RMPipeVertHF := RMVertCouplingHF_Origin[2] - FlocCoupling_Origin[2] - ElbowRadius(ND_RMPipeHF) = 1.21406 m
L_RMAirRelease := Floc_Origin[2] + H_Floc - (FlocCoupling_Origin[2] + innerdiameter(ND_RMPipeHF, PS_Default)/2 - zc)
# RM Fittings
RMFittingsLayer := layer_new("EtRmFittingsPlu", green)
RMCouplingHF := CouplingSUBF(RMVertCouplingHF_Origin, [0; 90]*deg, ND_RMPipeHF, PS_Default, ["EtCon"])
RMElbowHF := ElbowSUBF(RMHorizPipeHF_Origin, [0; 90; 0]*deg, ND_RMPipeHF, PS_Default, ["EtCon"])
FreezeRMElbow := FreezeLayer("EtRmFittingsPlu")
# RM Pipes
RMPipeLayer := layer_new("EtRmPipePlu", blue)
RMVertPipeHF := PipeSUBF(RMVertCouplingHF_Origin, L_RMPipeVertHF, [0; -90]*deg, ND_RMPipeHF, PS_Default, ["EtCon"])
RMHorizPipeHF := PipeF(RMHorizPipeHF_Origin, L_RMPipeHorizHF, [90; 0]*deg, ND_RMPipeHF, PS_Default)
RMAirReleaseHF := PipeF([
    RMHorizPipeHF_Origin[0];
    RMHorizPipeHF_Origin[1] - L_RMPipeHorizHF + SocketDepth(ND_RMPipeHF) + S_Fitting + outerradius(ND_RMAirRelease);
    FlocCoupling_Origin[2] + innerdiameter(ND_RMPipeHF, PS_Default)/2 - zc
], L_RMAirRelease, [0; 90]*deg, ND_RMAirRelease, PS_Default)
RMAirReleaseHoleHF := CylinderF([
    RMHorizPipeHF_Origin[0];
    RMHorizPipeHF_Origin[1] - L_RMPipeHorizHF + SocketDepth(ND_RMPipeHF) + S_Fitting + outerradius(ND_RMAirRelease);
    FlocCoupling_Origin[2]
], outerradius(ND_RMAirRelease), outerradius(ND_RMPipe) + zc, [0; 90]*deg)
FreezeRMPipe := FreezeLayer("EtRmPipePlu")
RmPipeHFScript := stack(RMFittingsLayer, RMCouplingHF, RMElbowHF, FreezeRMElbow, RMPipeLayer, RMVertPipeHF, RMHorizPipeHF, RMAirReleaseHF, RMAirReleaseHoleHF, FreezeRMPipe)
# Hopper Drains
DrainCouplingLayer := layer_new("EtDrainCouplingsPlu", green)
DrainWeirCoupling := CouplingSUBF([-S_Fitting - ConRadius(ND_EtDrain); ConRadius(ND_EtDrain) + S_Fitting; -SocketDepth(ND_EtDrain)] + Et_Origin, [0; 270]*deg, ND_EtDrain, PS_Default, ["EtCon"])
DrainCouplings :=
    Local ← stack(DrainCouplingLayer, DrainWeirCoupling)
    for i ∈ 0 .. N_EtFullHopper
        Local ← stack(Local, CouplingSUBF([
            -(L_EtHopper + T_EtHopperLedge)*i - S_Fitting - ConRadius(ND_EtDrain);
            ConRadius(ND_EtDrain) + S_Fitting;
            -SocketDepth(ND_EtDrain)
        ] + Et_Origin, [0; 270]*deg, ND_EtDrain, PS_Default, ["EtCon"]))
    if EN_LfomPipe == 1
        Local ← stack(Local, CouplingSUBF([
            -(L_EtHopper + T_EtHopperLedge)*(N_EtFullHopper + 1) - S_Fitting - ConRadius(ND_EtDrain);
            ConRadius(ND_EtDrain) + S_Fitting;
            -SocketDepth(ND_EtDrain)
        ] + Et_Origin, [0; 270]*deg, ND_EtDrain, PS_Default, ["EtCon"]))
    otherwise
        Local ← stack(Local, CouplingSUBF([
            -(L_EtHopper + T_EtHopperLedge)*(N_EtFullHopper + 1) - S_Fitting - ConRadius(ND_EtDrain);
            W_Et - (ConRadius(ND_EtDrain) + S_Fitting);
            -SocketDepth(ND_EtDrain)
        ] + Et_Origin, [0; 270]*deg, ND_EtDrain, PS_Default, ["EtCon"]))
FreezeDrainCouplings := FreezeLayer("EtDrainCouplingsPlu")
DrainPipeLayer := layer_new("EtDrainPipesPlu", blue)
DrainPipes :=
    Local ← stack(FreezeDrainCouplings, DrainPipeLayer)
    for i ∈ 0 .. N_EtFullHopper
        Local ← stack(Local, PipeSUBF([
            -(L_EtHopper + T_EtHopperLedge)*i - S_Fitting - ConRadius(ND_EtDrain);
            ConRadius(ND_EtDrain) + S_Fitting;
            SocketDepth(ND_EtDrain) - CouplingLength(ND_EtDrain)
        ] + Et_Origin, T_PlantWall, [0; 270; 0]*deg, ND_EtDrain, PS_Default, ["EtCon"]))
    if EN_LfomPipe == 1
        Local ← stack(Local, PipeSUBF([
            -(L_EtHopper + T_EtHopperLedge)*(N_EtFullHopper + 1) - S_Fitting - ConRadius(ND_EtDrain);
            ConRadius(ND_EtDrain) + S_Fitting;
            SocketDepth(ND_EtDrain) - CouplingLength(ND_EtDrain)
        ] + Et_Origin, T_PlantWall, [0; 270; 0]*deg, ND_EtDrain, PS_Default, ["EtCon"]))
    otherwise
        Local ← stack(Local, PipeSUBF([
            -(L_EtHopper + T_EtHopperLedge)*(N_EtFullHopper + 1) - S_Fitting - ConRadius(ND_EtDrain);
            W_Et - (ConRadius(ND_EtDrain) + S_Fitting);
            SocketDepth(ND_EtDrain) - CouplingLength(ND_EtDrain)
        ] + Et_Origin, T_PlantWall, [0; 270; 0]*deg, ND_EtDrain, PS_Default, ["EtCon"]))
FreezePipes := FreezeLayer("EtDrainPipesPlu")
StopperLayer := layer_new("EtDrainStoppersPlu", red)
L_EtDrainStopper := H_Et - H_PlantFreeboard/2 + SocketDepth(ND_EtDrain)
FirstStopper := PipeF([-S_Fitting - ConRadius(ND_EtDrain); ConRadius(ND_EtDrain) + S_Fitting; -SocketDepth(ND_EtDrain)] + Et_Origin, L_EtDrainStopper, [0; 90; 0]*deg, ND_EtDrain, PS_Default)
StopperPipes :=
    Local ← stack(FreezePipes, StopperLayer)
    for i ∈ 0 .. N_EtFullHopper
        Local ← stack(Local, PipeF([
            -(L_EtHopper + T_EtHopperLedge)*i - S_Fitting - ConRadius(ND_EtDrain);
            ConRadius(ND_EtDrain) + S_Fitting;
            -SocketDepth(ND_EtDrain)
        ] + Et_Origin, L_EtDrainStopper, [0; 90; 0]*deg, ND_EtDrain, PS_Default))
    if EN_LfomPipe == 1
        Local ← stack(Local, PipeF([
            -(L_EtHopper + T_EtHopperLedge)*(N_EtFullHopper + 1) - S_Fitting - ConRadius(ND_EtDrain);
            ConRadius(ND_EtDrain) + S_Fitting;
            -SocketDepth(ND_EtDrain)
        ] + Et_Origin, L_EtDrainStopper, [0; 90; 0]*deg, ND_EtDrain, PS_Default))
    otherwise
        Local ← stack(Local, PipeF([
            -(L_EtHopper + T_EtHopperLedge)*(N_EtFullHopper + 1) - S_Fitting - ConRadius(ND_EtDrain);
            W_Et - (ConRadius(ND_EtDrain) + S_Fitting);
            -SocketDepth(ND_EtDrain)
        ] + Et_Origin, L_EtDrainStopper, [0; 90; 0]*deg, ND_EtDrain, PS_Default))
FreezeStopper := FreezeLayer("EtDrainStoppersPlu")
EtDrainsRight := stack(DrainCouplings, DrainPipes, StopperPipes, FreezeStopper)
ThawDrains := ThawMultiple(["EtCon"; "EtDrainCouplingsPlu"; "EtDrainPipesPlu"; "EtWeir"; "EtTrashrack"; "Cdc"; "CdcFittings"; "EtDrainStoppersPlu"])
MirrorDrains := Mirror3dAll("YZ", [Plant_Origin[0] - 1/2*L_Sed; 0 m; 0 m], "Y")
FreezeDrains := FreezeMultiple(["EtCon"; "EtDrainCouplingsPlu"; "EtDrainPipesPlu"; "EtWeir"; "EtTrashrack"; "Cdc"; "CdcFittings"; "EtDrainStoppersPlu"])
EtDrainsLeft := stack(ThawDrains, MirrorDrains, FreezeDrains)
# Overflow Drain
# The half of the PVC overflow channel closer to the right-hand end of the tank (from top view):
EtChannelPipe1 := PipeF(Et_Origin + [
    -CapThickness(ND_EtOverflowDrain);
    W_EtDC + SocketDepth(ND_EtOverflowDrain) + ElbowRadius(ND_EtOverflowDrain);
    H_EtHopper + HL_Flowmeasure - innerdiameter(ND_EtOverflowDrain, PS_Default)/2 + H_EtOverflowCutaway + H_EtLFOMtoOverflow
], L_EtChannelPipes, [0; 0; 0]*deg, ND_EtOverflowDrain, PS_Default)
# The half of the PVC overflow channel closer to the trash rack:
EtChannelPipe2 := PipeF(Et_Origin + [
    -CapThickness(ND_EtOverflowDrain) - L_EtChannelPipes - TeeLength(ND_EtOverflowDrain);
    W_EtDC + SocketDepth(ND_EtOverflowDrain) + ElbowRadius(ND_EtOverflowDrain);
    H_EtHopper + HL_Flowmeasure - innerdiameter(ND_EtOverflowDrain, PS_Default)/2 + H_EtOverflowCutaway + H_EtLFOMtoOverflow
], L_EtChannelPipes, [0; 0; 0]*deg, ND_EtOverflowDrain, PS_Default)
EtOverflowTee := TeeF(Et_Origin + [
    -CapThickness(ND_EtOverflowDrain) - L_EtChannelPipes - TeeLength(ND_EtOverflowDrain)/2;
    W_EtDC + SocketDepth(ND_EtOverflowDrain) + ElbowRadius(ND_EtOverflowDrain);
    H_EtHopper + HL_Flowmeasure - innerdiameter(ND_EtOverflowDrain, PS_Default)/2 + H_EtOverflowCutaway + H_EtLFOMtoOverflow - ShortTeeLength(ND_EtOverflowDrain)
], [0; 0; -90]*deg, ND_EtOverflowDrain, PS_Default)
EtOverflowCap1 := CapF(Et_Origin + [
    -CapThickness(ND_EtOverflowDrain);
    W_EtDC + SocketDepth(ND_EtOverflowDrain) + ElbowRadius(ND_EtOverflowDrain);
    H_EtHopper + HL_Flowmeasure - innerdiameter(ND_EtOverflowDrain, PS_Default)/2 + H_EtOverflowCutaway + H_EtLFOMtoOverflow
], [0; 0; 0]*deg, ND_EtOverflowDrain)
EtOverflowCap2 := CapF(Et_Origin + [
    -CapThickness(ND_EtOverflowDrain) - 2*L_EtChannelPipes - TeeLength(ND_EtOverflowDrain);
    W_EtDC + SocketDepth(ND_EtOverflowDrain) + ElbowRadius(ND_EtOverflowDrain);
    H_EtHopper + HL_Flowmeasure - innerdiameter(ND_EtOverflowDrain, PS_Default)/2 + H_EtOverflowCutaway + H_EtLFOMtoOverflow
], [0; 180; 0]*deg, ND_EtOverflowDrain)
L_EtOverflowPipeVert := H_EtHopper + HL_Flowmeasure - innerdiameter(ND_EtOverflowDrain, PS_Default)/2 + H_EtOverflowCutaway + H_EtLFOMtoOverflow - ShortTeeLength(ND_EtOverflowDrain) + T_PlantWall + ConRadius(ND_EtOverflowDrain) - ElbowRadius(ND_EtOverflowDrain)
EtOverflowPipeVert := PipeSUBF(Et_Origin + [
    -CapThickness(ND_EtOverflowDrain) - L_EtChannelPipes - TeeLength(ND_EtOverflowDrain)/2;
    W_EtDC + SocketDepth(ND_EtOverflowDrain) + ElbowRadius(ND_EtOverflowDrain);
    H_EtHopper + HL_Flowmeasure - innerdiameter(ND_EtOverflowDrain, PS_Default)/2 + H_EtOverflowCutaway + H_EtLFOMtoOverflow - ShortTeeLength(ND_EtOverflowDrain)
], L_EtOverflowPipeVert, [0; -90; 0]*deg, ND_EtOverflowDrain, PS_Default, ["EtCon"])
EtOverflowElbow := ElbowSUBF(Et_Origin + [
    -CapThickness(ND_EtOverflowDrain) - L_EtChannelPipes - TeeLength(ND_EtOverflowDrain)/2;
    W_EtDC + SocketDepth(ND_EtOverflowDrain) + ElbowRadius(ND_EtOverflowDrain);
    -T_PlantWall - ConRadius(ND_EtOverflowDrain) + ElbowRadius(ND_EtOverflowDrain)
], [90; 270; 0]*deg, ND_EtOverflowDrain, PS_Default, ["EtCon"])
EtOverflowWeirSlot := BoxF(Et_Origin + [
    -CapThickness(ND_EtOverflowDrain);
    W_EtDC + SocketDepth(ND_EtOverflowDrain) + ElbowRadius(ND_EtOverflowDrain) - W_EtOverflowSlot/2;
    H_EtHopper + HL_Flowmeasure + H_EtLFOMtoOverflow - zc
], Et_Origin + [
    -CapThickness(ND_EtOverflowDrain) - L_EtOverflowWeir/2;
    W_EtDC + SocketDepth(ND_EtOverflowDrain) + ElbowRadius(ND_EtOverflowDrain) + W_EtOverflowSlot/2;
    H_EtHopper + HL_Flowmeasure + H_EtOverflowCutaway + H_EtLFOMtoOverflow + CapThickness(ND_EtOverflowDrain) + 2*zc
], [0; 0; 0]*deg)
EtOverflowFittingLayer := layer_new("EtOverflowFittingPlu", green)
FreezeEtOverflowFittings := FreezeLayer("EtOverflowFittingPlu")
EtOverflowPipeLayer := layer_new("EtOverflowPipePlu", blue)
FreezeEtOverflowPipe := FreezeLayer("EtOverflowPipePlu")
SubtractSlotFromFittings := SubtractF(["EtOverflowFittingPlu"], "DeleteMe")
SubtractSlotFromPipes := SubtractF(["EtOverflowPipePlu"], "DeleteMe")
EtOverflowPluScript := stack(EtOverflowFittingLayer, EtOverflowTee, EtOverflowCap1, EtOverflowCap2, EtOverflowElbow, FreezeEtOverflowFittings, EtOverflowPipeLayer, EtOverflowPipeVert, EtChannelPipe1, EtChannelPipe2, FreezeEtOverflowPipe, EtOverflowWeirSlot, GroupDelete, SubtractSlotFromFittings, EtOverflowWeirSlot, GroupAll("DeleteMe"), SubtractSlotFromPipes)
# Flow Control Drain
Z_EtFlowControl := max(Z_Walkway + ConRadius(ND_EtFlowControl), Et_Origin[2] - T_PlantWall - ConRadius(ND_EtFlowControl) + 2*ElbowRadius(ND_EtFlowControl) + 2*SocketDepth(ND_EtFlowControl)) = 1.98978 m
EtFlowControlPipeLayer := layer_new("EtFlowControlPipePlu", blue)
EtFlowControlNipple1 := PipeF([
    Et_Origin[0] - 2*S_Fitting - 2*ConRadius(ND_EtDrain) - ConRadius(ND_EtFlowControl);
    Et_Origin[1] - T_PlantWall + SocketDepth(ND_EtFlowControl);
    Z_EtFlowControl
], 2*SocketDepth(ND_EtFlowControl), [90; 0; 0]*deg, ND_EtFlowControl, PS_Default)
EtFlowControlNipple2 := PipeF([
    Et_Origin[0] - 2*S_Fitting - 2*ConRadius(ND_EtDrain) - ConRadius(ND_EtFlowControl);
    Et_Origin[1] - T_PlantWall - 2*MaleAdapterLength(ND_EtFlowControl) - ValveLength(ND_EtFlowControl) + 2*ValveSocket(ND_EtFlowControl) - SocketDepth(ND_EtFlowControl);
    Z_EtFlowControl
], 2*SocketDepth(ND_EtFlowControl), [-90; 0; 0]*deg, ND_EtFlowControl, PS_Default)
L_EtFlowControlVert := Z_EtFlowControl - (Et_Origin[2] - T_PlantWall - ConRadius(ND_EtFlowControl)) - 2*ElbowRadius(ND_EtFlowControl) = 0.128 m
EtFlowControlVertPipe := PipeF([
    Et_Origin[0] - 2*S_Fitting - 2*ConRadius(ND_EtDrain) - ConRadius(ND_EtFlowControl);
    Et_Origin[1] - T_PlantWall - 2*MaleAdapterLength(ND_EtFlowControl) - ValveLength(ND_EtFlowControl) + 2*ValveSocket(ND_EtFlowControl) - SocketDepth(ND_EtFlowControl) - ElbowRadius(ND_EtFlowControl);
    Et_Origin[2] - T_PlantWall - ConRadius(ND_EtFlowControl) + ElbowRadius(ND_EtFlowControl)
], L_EtFlowControlVert, [0; 90; 0]*deg, ND_EtFlowControl, PS_Default)
L_EtFlowControlHoriz := max(T_PlantWall - CouplingLength(ND_EtFlowControl) + SocketDepth(ND_EtFlowControl), 0 m)
EtFlowControlHorizPipe1 := PipeSUBF([
    Et_Origin[0] - 2*S_Fitting - 2*ConRadius(ND_EtDrain) - ConRadius(ND_EtFlowControl);
    Et_Origin[1] - T_PlantWall + CouplingLength(ND_EtFlowControl) - SocketDepth(ND_EtFlowControl);
    Z_EtFlowControl
], L_EtFlowControlHoriz, [-90; 0; 0]*deg, ND_EtFlowControl, PS_Default, ["EtCon"])
EtFlowControlHorizPipe2 := PipeSUBF([
    Et_Origin[0] - 2*S_Fitting - 2*ConRadius(ND_EtDrain) - ConRadius(ND_EtFlowControl);
    Et_Origin[1] - T_PlantWall + CouplingLength(ND_EtFlowControl) - SocketDepth(ND_EtFlowControl);
    Et_Origin[2] - T_PlantWall - ConRadius(ND_EtFlowControl)
], L_EtFlowControlHoriz, [-90; 0; 0]*deg, ND_EtFlowControl, PS_Default, ["EtCon"])
L_EtFlowControlHoriz3 := 2*SocketDepth(ND_EtFlowControl) + 2*MaleAdapterLength(ND_EtFlowControl) + ValveLength(ND_EtFlowControl) - 2*ValveSocket(ND_EtFlowControl)
EtFlowControlHorizPipe3 := PipeF([
    Et_Origin[0] - 2*S_Fitting - 2*ConRadius(ND_EtDrain) - ConRadius(ND_EtFlowControl);
    Et_Origin[1] - T_PlantWall + SocketDepth(ND_EtFlowControl);
    Et_Origin[2] - T_PlantWall - ConRadius(ND_EtFlowControl)
], L_EtFlowControlHoriz3, [90; 0; 0]*deg, ND_EtFlowControl, PS_Default)
EtFlowControlFittingLayer := layer_new("EtFlowControlFittingPlu", green)
EtFlowControlCoupling1 := CouplingSUBF([
    Et_Origin[0] - 2*S_Fitting - 2*ConRadius(ND_EtDrain) - ConRadius(ND_EtFlowControl);
    Et_Origin[1] - T_PlantWall + SocketDepth(ND_EtFlowControl);
    Et_Origin[2] - T_PlantWall - ConRadius(ND_EtFlowControl)
], [-90; 0]*deg, ND_EtFlowControl, PS_Default, ["EtCon"])
EtFlowControlCoupling2 := CouplingSUBF([
    Et_Origin[0] - 2*S_Fitting - 2*ConRadius(ND_EtDrain) - ConRadius(ND_EtFlowControl);
    Et_Origin[1] - T_PlantWall + SocketDepth(ND_EtFlowControl);
    Z_EtFlowControl
], [-90; 0]*deg, ND_EtFlowControl, PS_Default, ["EtCon"])
EtFlowControlElbow1 := ElbowF([
    Et_Origin[0] - 2*S_Fitting - 2*ConRadius(ND_EtDrain) - ConRadius(ND_EtFlowControl);
    Et_Origin[1] - T_PlantWall - 2*MaleAdapterLength(ND_EtFlowControl) - ValveLength(ND_EtFlowControl) + 2*ValveSocket(ND_EtFlowControl) - SocketDepth(ND_EtFlowControl);
    Et_Origin[2] - T_PlantWall - ConRadius(ND_EtFlowControl)
], [0; -90; 180]*deg, ND_EtFlowControl, PS_Default)
EtFlowControlElbow2 := ElbowF([
    Et_Origin[0] - 2*S_Fitting - 2*ConRadius(ND_EtDrain) - ConRadius(ND_EtFlowControl);
    Et_Origin[1] - T_PlantWall - 2*MaleAdapterLength(ND_EtFlowControl) - ValveLength(ND_EtFlowControl) + 2*ValveSocket(ND_EtFlowControl) - SocketDepth(ND_EtFlowControl);
    Z_EtFlowControl
], [0; 90; 180]*deg, ND_EtFlowControl, PS_Default)
EtFlowControlAdapterLayer := layer_new("EtFlowControlAdapterPlu", blue3)
EtFlowControlAdapter1 := MaleAdapterF([
    Et_Origin[0] - 2*S_Fitting - 2*ConRadius(ND_EtDrain) - ConRadius(ND_EtFlowControl);
    Et_Origin[1] - T_PlantWall - SocketDepth(ND_EtFlowControl);
    Z_EtFlowControl
], [90; 0]*deg, ND_EtFlowControl, PS_Default)
EtFlowControlAdapter2 := MaleAdapterF([
    Et_Origin[0] - 2*S_Fitting - 2*ConRadius(ND_EtDrain) - ConRadius(ND_EtFlowControl);
    Et_Origin[1] - T_PlantWall - 2*MaleAdapterLength(ND_EtFlowControl) - ValveLength(ND_EtFlowControl) + 2*ValveSocket(ND_EtFlowControl) + SocketDepth(ND_EtFlowControl);
    Z_EtFlowControl
], [-90; 0]*deg, ND_EtFlowControl, PS_Default)
EtFlowControlValveLayer := layer_new("EtFlowControlValvePlu", blue2)
EtFlowControlValve := insertdwg("https://confluence.cornell.edu/download/attachments/173604905/Et-Scaled-Gate-Valve-Threaded.dwg", [
    Et_Origin[0] - 2*S_Fitting - 2*ConRadius(ND_EtDrain) - ConRadius(ND_EtFlowControl);
    Et_Origin[1] - T_PlantWall - MaleAdapterLength(ND_EtFlowControl) + ValveSocket(ND_EtFlowControl);
    Z_EtFlowControl
], 2*outerradius(ND_EtFlowControl)/(1.16 m), 2*outerradius(ND_EtFlowControl)/(1.16 m), 0 deg)
L_EtFlowControlHoriz ≤ SocketDepth(ND_EtFlowControl) = 1
RotateFlowControlValve := Rotate3DLast([
    Et_Origin[0] - 2*S_Fitting - 2*ConRadius(ND_EtDrain) - ConRadius(ND_EtFlowControl);
    Et_Origin[1] - T_PlantWall - MaleAdapterLength(ND_EtFlowControl) + ValveSocket(ND_EtFlowControl);
    Z_EtFlowControl
], "z", 90 deg)
FlowControlScript :=
    stack(EtFlowControlPipeLayer, EtFlowControlNipple1, EtFlowControlNipple2, EtFlowControlVertPipe, EtFlowControlHorizPipe3, FreezeLayer("EtFlowControlPipePlu"), EtFlowControlFittingLayer, EtFlowControlCoupling1, EtFlowControlCoupling2, EtFlowControlElbow1, EtFlowControlElbow2, FreezeLayer("EtFlowControlFittingPlu"), EtFlowControlAdapterLayer, EtFlowControlAdapter1, EtFlowControlAdapter2, FreezeLayer("EtFlowControlAdapterPlu"), EtFlowControlValveLayer, EtFlowControlValve, RotateFlowControlValve, FreezeLayer("EtFlowControlValvePlu")) if L_EtFlowControlHoriz ≤ SocketDepth(ND_EtFlowControl)
    stack(EtFlowControlPipeLayer, EtFlowControlNipple1, EtFlowControlNipple2, EtFlowControlVertPipe, EtFlowControlHorizPipe1, EtFlowControlHorizPipe2, EtFlowControlHorizPipe3, FreezeLayer("EtFlowControlPipePlu"), EtFlowControlFittingLayer, EtFlowControlCoupling1, EtFlowControlCoupling2, EtFlowControlElbow1, EtFlowControlElbow2, FreezeLayer("EtFlowControlFittingPlu"), EtFlowControlAdapterLayer, EtFlowControlAdapter1, EtFlowControlAdapter2, FreezeLayer("EtFlowControlAdapterPlu"), EtFlowControlValveLayer, EtFlowControlValve, RotateFlowControlValve, FreezeLayer("EtFlowControlValvePlu")) otherwise
# Inlet Pipe
EtInletPipeLayer := layer_new("EtInletPipePlu", blue)
EtInletFittingLayer := layer_new("EtInletFittingPlu", green)
ND_EtInlet := ND_DistPipe = 10 in
EtInletElbow := ElbowF(Et_Origin + [
    0 m;
    W_EtDC + SocketDepth(ND_EtOverflowDrain) + ElbowRadius(ND_EtOverflowDrain) - ConRadius(ND_EtOverflowDrain) - S_Fitting - ConRadius(ND_EtInlet);
    H_Et + ConRadius(ND_EtInlet)
], [90; 0; 90]*deg, ND_EtInlet, PS_Default)
L_EtInletPipe := 1 m
EtInletPipe := PipeF(Et_Origin + [
    L_EtInletPipe;
    W_EtDC + SocketDepth(ND_EtOverflowDrain) + ElbowRadius(ND_EtOverflowDrain) - ConRadius(ND_EtOverflowDrain) - S_Fitting - ConRadius(ND_EtInlet);
    H_Et + ConRadius(ND_EtInlet)
], L_EtInletPipe, [0; 0; 0]*deg, ND_EtInlet, PS_Default)
FreezeEtInletPipe := FreezeLayer("EtInletPipePlu")
FreezeEtInletFittings := FreezeLayer("EtInletFittingPlu")
EtInletScript := stack(EtInletFittingLayer, EtInletElbow, FreezeEtInletFittings, EtInletPipeLayer, EtInletPipe, FreezeEtInletPipe)
# Add Water Levels
EtWaterLayer := layer_new("EtWater", blue2)
EtWater := BoxF(Et_Origin, [Et_Origin[0] - L_Et; Et_Origin[1] + W_Et; ZW_Et], [0; 0; 0]*deg)
EtRMPipeWater := CylinderF(RMElbow_Origin + [0; ElbowRadius(ND_RMPipe); ElbowRadius(ND_RMPipe)], innerdiameter(ND_RMPipe, PS_Default)/2, ZW_RMPipe - RMElbow_Origin[2] - ElbowRadius(ND_RMPipe), [0; 90]*deg)
EtWaterFrz := FreezeLayer("EtWater")
EtWaterScript := stack(EtWaterLayer, EtWater, EtRMPipeWater, EtWaterFrz)
AC_EntranceTank :=
    stack(EtTankScript, EtTrashRackScript, EtOverflowPluScript, EtDrainsRight, RMScript, FlowControlScript, EtInletScript) if EN_LfomPipe == 1
    stack(EtTankScript, EtTrashRackScript, EtOverflowPluScript, EtDrainsRight, LfomChannelScript, RmPipeHFScript, FlowControlScript, EtInletScript) otherwise
AC_EntranceTankWater :=
    stack(EtTankScript, EtTrashRackScript, EtOverflowPluScript, EtDrainsRight, RMScript, FlowControlScript, EtInletScript, EtWaterScript) if EN_LfomPipe == 1
    stack(EtTankScript, EtTrashRackScript, EtOverflowPluScript, EtDrainsRight, LfomChannelScript, RmPipeHFScript, FlowControlScript, EtInletScript, EtWaterScript) otherwise
AC_EntranceTank :=
    AC_EntranceTank if EN_Water == 0
    AC_EntranceTankWater otherwise
# [component: inputs AC_EntranceTank]
