# [reference: MasterProgram.xmcd]
# [reference: MtoATranslators Wrapped.xmcd]
# [reference: Stacked RSF for Marcala FINAL (1).xmcd]
H_Filter := 3.6 m  # The top of the inlet box is designed at 3.3m, but the height of the filter has not been set. I am putting it at 3.6m for now.
Filter1_origin := [
    Plant_Origin[0] - H_ExitChannel - 2*T_PlantWall;
    Plant_Origin[1] - L_Filter - T_PlantWall;
    Plant_Origin[2] + H_Sed - H_Filter
]
Filter2_origin := [
    Plant_Origin[0] - H_ExitChannel - 3*T_PlantWall - W_Filter;
    Plant_Origin[1] - L_Filter - T_PlantWall;
    Plant_Origin[2] + H_Sed - H_Filter
]
FilterInletBox_origin := [
    Filter1_origin[0] + T_PlantWall - T_WallSedChanneltoFilter;
    Filter1_origin[1] - W_SedChanneltoFilterInlet - T_PlantWall - L_FilterInletBox;
    Filter1_origin[2] + Z_BottomFilterInletBox - T_WallSedChanneltoFilter
]
SettledWaterBox_origin := [
    Filter1_origin[0] + T_PlantWall - T_WallSedChanneltoFilter;
    Filter1_origin[1] - W_SedChanneltoFilterInlet - T_PlantWall;
    Filter1_origin[2] + Z_BottomFlowControlBox - T_WallSedChanneltoFilter
]
# assuming 2ft walkway
BackwashDrain_origin := [
    Filter1_origin[0] - W_Filter - 0.5*T_PlantWall + L_BackwashDrain/2;
    Filter1_origin[1] - 2*T_PlantWall - W_SedChanneltoFilterInlet - L_FilterInletBox - 2*T_WallSedChanneltoFilter - 2 ft - W_BackwashDrain;
    Filter1_origin[2] + Z_BackwashDrain
]
Filter_dim := [W_Filter; L_Filter; H_Filter]
FilterInletBox_dim := [2*W_Filter + 3*T_PlantWall - 2*T_WallSedChanneltoFilter; L_FilterInletBox; H_FilterInletBox]
SettledWaterBox_dim := [
    2*W_Filter + 3*T_PlantWall - 2*T_WallSedChanneltoFilter;
    W_SedChanneltoFilterInlet;
    H_FlowControlBox
]
BackwashDrain_dim := [L_BackwashDrain; W_BackwashDrain; H_BackwashDrain]
FilterBoxScript :=
    New ← layer_new("Filter", grey)
    Filter1 ← Tank(Filter1_origin, Filter_dim, T_PlantWall)
    Filter2 ← Tank(Filter2_origin, Filter_dim, T_PlantWall)
    Union ← union_allA
    Freeze ← FreezeLayer("Filter")
    return stack(New, Filter1, Filter2, Union, Freeze)
FilterTroughScript :=
    New ← layer_new("FilterTrough", yellow)
    Pipe ← PipeF([
        Plant_Origin[0] - H_ExitChannel - 2*T_PlantWall - 0.5*W_Filter;
        Filter1_origin[1] - 2*T_PlantWall - W_SedChanneltoFilterInlet - L_FilterInletBox - 2*T_WallSedChanneltoFilter - 2 ft;
        Plant_Origin[2] + H_Sed - H_Filter + Z_Trough + outerradius(D_Trough)
    ], T_ConcreteMin + L_Filter + 2*T_PlantWall + W_SedChanneltoFilterInlet + L_FilterInletBox + 2 ft, [270; 0]*deg, D_FilterTrough, PipeSpecification)
    Freeze ← FreezeLayer("FilterTrough")
    Box ← BoxF([
        Plant_Origin[0] - H_ExitChannel - 2*T_PlantWall - 0.5*W_Filter - D_FilterTrough;
        Filter1_origin[1] - 2*T_PlantWall - W_SedChanneltoFilterInlet - L_FilterInletBox - 2*T_WallSedChanneltoFilter - 2 ft;
        Plant_Origin[2] + H_Sed - H_Filter + Z_Trough + outerradius(D_Trough)
    ], [
        Plant_Origin[0] - H_ExitChannel - 2*T_PlantWall - 0.5*W_Filter + D_FilterTrough;
        Plant_Origin[1] - T_PlantWall + T_ConcreteMin;
        Plant_Origin[2] + H_Sed - H_Filter + Z_Trough + outerradius(D_Trough) + D_FilterTrough
    ], [0; 0; 0]*deg)
    Group ← GroupAll("DeleteMe")
    CutPipe ← SubtractF(["FilterTrough"], "DeleteMe")
    return stack(New, Pipe, Freeze, Box, Group, CutPipe)  # assumes 2ft walkway
FilterFlowControlBox :=
    New ← layer_new("FilterFlowControlBox", grey)
    Tank ← Tank(FilterInletBox_origin, FilterInletBox_dim, T_WallSedChanneltoFilter)
    Separator ← box([
        Filter1_origin[0] - W_Filter;
        Filter1_origin[1] - T_PlantWall - W_SedChanneltoFilterInlet;
        FilterInletBox_origin[2]
    ], [
        Filter1_origin[0] - W_Filter - T_PlantWall;
        Filter1_origin[1] - T_PlantWall - W_SedChanneltoFilterInlet - L_FilterInletBox;
        FilterInletBox_origin[2] + H_FilterInletBox
    ])
    Union ← union_allA
    Freeze ← FreezeLayer("FilterFlowControlBox")
    return stack(New, Tank, Separator, Union, Freeze)
SettledWaterBox :=
    New ← layer_new("SettledWaterBox", grey)
    Tank ← Tank(SettledWaterBox_origin, SettledWaterBox_dim, T_WallSedChanneltoFilter)
    Freeze ← FreezeLayer("SettledWaterBox")
    Weir1 ← box([
        Filter1_origin[0];
        Filter1_origin[1] - T_PlantWall - W_SedChanneltoFilterInlet;
        Filter1_origin[2] + Z_TopFilterWeir
    ], [
        Filter1_origin[0] - W_Filter;
        Filter1_origin[1] - T_PlantWall - W_SedChanneltoFilterInlet - T_WallSedChanneltoFilter;
        Filter1_origin[2] + Z_TopFilterWeir + H_FilterInletBox
    ])
    Weir2 ← box([
        Filter2_origin[0];
        Filter2_origin[1] - T_PlantWall - W_SedChanneltoFilterInlet;
        Filter1_origin[2] + Z_TopFilterWeir
    ], [
        Filter2_origin[0] - W_Filter;
        Filter2_origin[1] - T_PlantWall - W_SedChanneltoFilterInlet - T_WallSedChanneltoFilter;
        Filter1_origin[2] + Z_TopFilterWeir + H_FilterInletBox
    ])
    Group ← GroupAll("DeleteMe")
    Subtract ← SubtractF(["SettledWaterBox"], "DeleteMe")
    return stack(New, Tank, Freeze, Weir1, Weir2, Group, Subtract)
BackwashDrainBox :=
    New ← layer_new("BackwashDrain", yellow)
    Tank ← Tank(BackwashDrain_origin, BackwashDrain_dim, T_PlantWall)
    Freeze ← FreezeLayer("BackwashDrain")
    return stack(New, Tank, Freeze)
AC_Filter := stack(FilterBoxScript, FilterTroughScript, FilterFlowControlBox, SettledWaterBox, BackwashDrainBox)
# [component: inputs AC_Filter]
