# [reference: MasterProgram.xmcd]
# [reference: PipeDatabase_orh3.xmcd]
Flex
FlexCouplingF(OriginPoint, AngleVector, ND) :=
    Zoom ← zoom_win([OriginPoint[0] + zc; OriginPoint[1] + zc + OuterRadiusFlex(ND); OriginPoint[2]], [
        OriginPoint[0] - CouplingLengthFlex(ND) - zc;
        OriginPoint[1] - zc - OuterRadiusFlex(ND);
        OriginPoint[2]
    ])
    OuterCylinder ← cylinderD([OriginPoint[0]; OriginPoint[1]; OriginPoint[2]], OuterRadiusFlex(ND), [OriginPoint[0] - CouplingLengthFlex(ND); OriginPoint[1]; OriginPoint[2]])
    InnerCylinder ← cylinderD([OriginPoint[0]; OriginPoint[1]; OriginPoint[2]], InnerRadiusFlex(ND), [OriginPoint[0] - CouplingLengthFlex(ND); OriginPoint[1]; OriginPoint[2]])
    Subtract ← subtractD([OriginPoint[0]; OriginPoint[1] - OuterRadiusFlex(ND); OriginPoint[2]], [OriginPoint[0]; OriginPoint[1] - InnerRadiusFlex(ND); OriginPoint[2]])
    Rotate ← [Rotate3DLast(OriginPoint, "z", AngleVector[0]); Rotate3DLast(OriginPoint, "y", AngleVector[1])]
    Final ← stack(Zoom, OuterCylinder, InnerCylinder, Subtract)
    for i ∈ 0 .. 1
        Final ← stack(Final, Rotate[i]) if AngleVector[i] ≠ 0
    return Final
FlexCouplingSUBF(OriginPoint, AngleVector, ND, SubtractionLayers) :=
    Zoom ← zoom_win([OriginPoint[0] + zc; OriginPoint[1] + zc + OuterRadiusFlex(ND); OriginPoint[2]], [
        OriginPoint[0] - CouplingLengthFlex(ND) - zc;
        OriginPoint[1] - zc - OuterRadiusFlex(ND);
        OriginPoint[2]
    ])
    OuterCylinder ← cylinderD([OriginPoint[0]; OriginPoint[1]; OriginPoint[2]], OuterRadiusFlex(ND), [OriginPoint[0] - CouplingLengthFlex(ND); OriginPoint[1]; OriginPoint[2]])
    RotateCylinder ← [Rotate3DLast(OriginPoint, "z", AngleVector[0]); Rotate3DLast(OriginPoint, "y", AngleVector[1])]
    Final ← stack(Zoom, OuterCylinder)
    for i ∈ 0 .. 1
        Final ← stack(Final, RotateCylinder[i]) if AngleVector[i] ≠ 0
    Group ← GroupLast("DeleteMe")
    Local ← stack(Final, Group, SubtractF(SubtractionLayers, "DeleteMe"))
    DrawOuterCylinder ← cylinderD([OriginPoint[0]; OriginPoint[1]; OriginPoint[2]], OuterRadiusFlex(ND), [OriginPoint[0] - CouplingLengthFlex(ND); OriginPoint[1]; OriginPoint[2]])
    DrawInnerCylinder ← cylinderD([OriginPoint[0]; OriginPoint[1]; OriginPoint[2]], InnerRadiusFlex(ND), [OriginPoint[0] - CouplingLengthFlex(ND); OriginPoint[1]; OriginPoint[2]])
    SubtractInnerCylinder ← subtractD([OriginPoint[0]; OriginPoint[1] - OuterRadiusFlex(ND); OriginPoint[2]], [OriginPoint[0]; OriginPoint[1] - InnerRadiusFlex(ND); OriginPoint[2]])
    Draw ← stack(Local, DrawOuterCylinder, DrawInnerCylinder, SubtractInnerCylinder)
    for i ∈ 0 .. 1
        Draw ← stack(Draw, RotateCylinder[i]) if AngleVector[i]
    return Draw
FlexCouplingSUBF([1 in; 1 in; 3 in], [20; 40], 4 in, ["floctank"]) = [
    "_zoom w 0.0354,0.09573,0.0762 -0.0862,-0.04493,0.0762";
    "_cylinder 0.0254,0.0254,0.0762 0.06033 c -0.0762,0.0254,0.0762";
    "rotate3d l  z 0.0254,0.0254,0.0762 1145.91559";
    "rotate3d l  y 0.0254,0.0254,0.0762 2291.83118";
    "-group c DeleteMe y ";
    "l ";
    "-layer t floctank";
    "  ";
    "_subtract";
    "g floctank";
    " g DeleteMe ";
    "-layer f floctank";
    "  ";
    "_cylinder 0.0254,0.0254,0.0762 0.06033 c -0.0762,0.0254,0.0762";
    "_cylinder 0.0254,0.0254,0.0762 0.05715 c -0.0762,0.0254,0.0762";
    "_subtract 0.0254,-0.03492,0.0762  0.0254,-0.03175,0.0762 ";
    "rotate3d l  z 0.0254,0.0254,0.0762 1145.91559";
    "rotate3d l  y 0.0254,0.0254,0.0762 2291.83118"
]
DrawCoupling :=
    Layer ← layer_new("couplingtest", red)
    Draw ← FlexCouplingSUBF([.2059 m; 26.2395 m; 0 m], [10; 10]*deg, 4 in, ["floctank"])
    Freeze ← FreezeLayer("couplingtest")
    return stack(Layer, Draw, Freeze)
# [component: inputs DrawCoupling]
