# Floc Hopper Draw Script
# [reference: MasterProgram.xmcd]
FlocHopper_origin := [0; 0; 0]
FlocHopperBox_dim := [L_FlocHopper; T_FlocHopper; H_FlocHopper] = [0.82; 0.04; 0.705593] m
FlocHopperWedge_dim := [(L_FlocHopper - W_FlocHopper)/2; T_FlocHopper; FlocHopper_origin[2]] = [0.385; 0.04; 0] m
h_wedge := H_FlocHopper
FlocHopperScript :=
    layer1 ← layer_new("flochopper", green)
    viewtop ← viewtop1
    flochopper_box ← box(FlocHopper_origin, FlocHopperBox_dim)
    flochopper_wedge1 ← wedge(FlocHopper_origin, FlocHopperWedge_dim, H_FlocHopper)
    mirror_wedge ← mirrorD(FlocHopperWedge_dim, [FlocHopper_origin[0] + L_FlocHopper/2; FlocHopper_origin[1]], [FlocHopper_origin[0] + L_FlocHopper/2; T_FlocHopper])
    zoomin ← zoom_win([FlocHopper_origin[0]; FlocHopper_origin[1]], [2*FlocHopperBox_dim[0]; 2*FlocHopperBox_dim[1]])
    subtract_wedge1 ← subtractD([FlocHopperBox_dim[0]/2; FlocHopperBox_dim[1]; FlocHopperBox_dim[2]], [FlocHopperWedge_dim[0]; FlocHopperWedge_dim[1]/2; FlocHopper_origin[2]])
    subtract_wedge2 ← subtractD([FlocHopperBox_dim[0]/2; FlocHopperBox_dim[1]], [FlocHopperWedge_dim[0] + W_FlocHopper; FlocHopperWedge_dim[1]/2])
    rotate_flochopper1 ← rotate_3d(FlocHopperBox_dim, FlocHopper_origin, "z", 90)
    rotate_flochopper ← rotate_3d([FlocHopper_origin[0]; FlocHopper_origin[1]; H_FlocHopper], [FlocHopper_origin[0] + T_FlocHopper; FlocHopper_origin[1]; FlocHopper_origin[2]], "y", 90 - AN_FlocHopper)
    move_flochopper ← move_allD([
        -L_Sed + SedInletChimneyOuter_dim[0] + T_FlocHopper;
        W_SedBayActual*(N_SedBays - 1) + W_SedBayDivider*(N_SedBays - 1);
        SedDrainCover_dim[1]
    ])
    arraybay3 ← concat("-array", sp, "ALL", sp, sp, "r", sp, stringit_nounits(N_SedBays), sp, "1", sp, stringit(-W_SedBay - W_SedBayDivider/2))
    arraybay4 ← concat("-array", sp, "ALL", sp, sp, "r", sp, stringit_nounits(N_SedBays), sp, "1", sp, stringit(-((W_Sed - (N_SedBays - 1)*W_SedBayDivider)/N_SedBays + W_SedBayDivider)))
    layerset ← layer_set("0")
    layerfreeze ← layer_freeze("flochopper")
    one ← stack(layer1, viewtop, flochopper_box, flochopper_wedge1, mirror_wedge, zoomin, subtract_wedge1, subtract_wedge2, rotate_flochopper1, rotate_flochopper, move_flochopper, layerset, layerfreeze) if N_SedBays == 1
    one ← stack(layer1, viewtop, flochopper_box, flochopper_wedge1, mirror_wedge, zoomin, subtract_wedge1, subtract_wedge2, rotate_flochopper1, rotate_flochopper, move_flochopper, arraybay4, layerset, layerfreeze) if N_SedBays > 1 and N_SedTanks ≥ 1
    one ← stack(layer1, viewtop, flochopper_box, flochopper_wedge1, mirror_wedge, zoomin, subtract_wedge1, subtract_wedge2, rotate_flochopper1, rotate_flochopper, move_flochopper, arraybay3, layerset, layerfreeze) otherwise
    return one
# [component: inputs FlocHopperScript]
