S_FlocObsToWallGap := 1 cm
# Flocculator AutoCAD
# Layers
FlocTankLayer := layer_new("FlocTankCon", grey)
SelectFlocTank := SelectLayer("FlocTankCon")
FlocTankFrz := FreezeLayer("FlocTankCon")
SubtractFromFlocTank := SubtractF(["FlocTankCon"], "DeleteMe")
FlocDrainPipeLayer := layer_new("FlocDrainPipePlu", blue)
SelectFlocDrainPipe := SelectLayer("FlocDrainPipePlu")
FlocDrainPipeFrz := FreezeLayer("FlocDrainPipePlu")
FlocDrainFittingLayer := layer_new("FlocDrainFittingPlu", green)
SelectFlocDrainFitting := SelectLayer("FlocDrainFittingPlu")
FlocDrainFittingFrz := FreezeLayer("FlocDrainFittingPlu")
FlocDrainRemovableLayer := layer_new("FlocDrainRemovablePlu", red)
SelectFlocDrainRemovable := SelectLayer("FlocDrainRemovablePlu")
FlocDrainRemovableFrz := FreezeLayer("FlocDrainRemovablePlu")
FlocBaffleLayer := layer_new("FlocModBaffles", ltpurple)
SelectFlocBaffle := SelectLayer("FlocModBaffles")
FlocBaffleFrz := FreezeLayer("FlocModBaffles")
FlocModHorizPipeLayer := layer_new("FlocModHorizPipePlu", blue)
SelectFlocModHorizPipe := SelectLayer("FlocModHorizPipePlu")
FlocModHorizPipeFrz := FreezeLayer("FlocModHorizPipePlu")
FlocModVertPipeLayer := layer_new("FlocModVertPipe", blue)
SelectFlocModVertPipe := SelectLayer("FlocModVertPipe")
FlocModVertPipeFrz := FreezeLayer("FlocModVertPipe")
FlocModSpacerLayer := layer_new("FlocModSpacerPlu", blue3)
SelectFlocModSpacer := SelectLayer("FlocModSpacerPlu")
FlocModSpacerFrz := FreezeLayer("FlocModSpacerPlu")
SubtractFromFlocModSpacer := SubtractF(["FlocModSpacerPlu"], "DeleteMe")
FlocModSpacerALayer := layer_new("FlocModSpacerAPlu", blue3)
SelectFlocModSpacerA := SelectLayer("FlocModSpacerAPlu")
FlocModSpacerAFrz := FreezeLayer("FlocModSpacerAPlu")
FlocModSpacerBLayer := layer_new("FlocModSpacerBPlu", blue3)
SelectFlocModBSpacer := SelectLayer("FlocModSpacerBPlu")
FlocModSpacerBFrz := FreezeLayer("FlocModSpacerBPlu")
FlocModSpacerCLayer := layer_new("FlocModSpacerBPlu", blue3)
SelectFlocModCSpacer := SelectLayer("FlocModSpacerBPlu")
FlocModSpacerCFrz := FreezeLayer("FlocModSpacerBPlu")
FlocModFittingLayer := layer_new("FlocModFittingPlu", green)
SelectFlocModFitting := SelectLayer("FlocModFittingPlu")
FlocModFittingFrz := FreezeLayer("FlocModFittingPlu")
FlocRMFittingLayer := layer_new("FlocRMFittingPlu", green)
SelectFlocRMFitting := SelectLayer("FlocRMFittingPlu")
FlocRMFittingFrz := FreezeLayer("FlocRMFittingPlu")
FlocRMOrificeLayer := layer_new("FlocRMOrifice", red)
SelectFlocRMOrifice := SelectLayer("FlocRMOrifice")
FlocRMOrificeFrz := FreezeLayer("FlocRMOrifice")
SubtractFromFlocRMOrifice := SubtractF(["FlocRMOrifice"], "DeleteMe")
FlocRMOrificeRestrainerLayer := layer_new("FlocRMOrificeRestrainer", blue)
SelectFlocRMOrificeRestrainer := SelectLayer("FlocRMOrificeRestrainer")
FlocRMOrificeRestrainerFrz := FreezeLayer("FlocRMOrificeRestrainer")
FlocDrainFittingLayer := layer_new("FlocDrainFittingPlu", green)
SelectFlocDrainFitting := SelectLayer("FlocDrainFittingPlu")
FlocDrainFittingFrz := FreezeLayer("FlocDrainFittingPlu")
FlocDrainPipeLayer := layer_new("FlocDrainPipePlu", blue)
SelectFlocDrainPipe := SelectLayer("FlocDrainPipePlu")
FlocDrainPipeFrz := FreezeLayer("FlocDrainPipePlu")
FlocDrainRemovableLayer := layer_new("FlocDrainRemovablePlu", red)
SelectFlocDrainRemovable := SelectLayer("FlocDrainRemovablePlu")
FlocDrainRemovableFrz := FreezeLayer("FlocDrainRemovablePlu")
FlocModObsLayer := layer_new("FlocModObs", blue2)
SelectFlocModObs := SelectLayer("FlocModObs")
FlocModObsFrz := FreezeLayer("FlocModObs")
SubtractFromFlocModObs := SubtractF(["FlocModObs"], "DeleteMe")
FlocModObsFirstLayer := layer_new("FlocModObsFirst", blue2)
SelectFlocModObsFirst := SelectLayer("FlocModObsFirst")
FlocModObsFirstFrz := FreezeLayer("FlocModObsFirst")
SubtractFromFlocModObsFirst := SubtractF(["FlocModObsFirst"], "DeleteMe")
FlocModObsLastLayer := layer_new("FlocModObsLast", blue2)
SelectFlocModObsLast := SelectLayer("FlocModObsLast")
FlocModObsLastFrz := FreezeLayer("FlocModObsLast")
SubtractFromFlocModObsLast := SubtractF(["FlocModObsLast"], "DeleteMe")
# Flocculator masonry
# Origins
Floc_Origin := [
    Plant_Origin[0] + T_SedWall - T_FlocWall;
    Plant_Origin[1] + N_SedTanks*W_Sed + (N_SedTanks - 1)*T_SedDividingWall + max(T_SedWall, T_FlocWall);
    Z_FlocBottom
]
Floc_Dim := [L_Floc; N_FlocChannels*(W_FlocChannel + T_FlocDividingWall) - T_FlocDividingWall; H_Floc]
FlocChannelWall_Origin := [Floc_Origin[0] - L_Floc - T_FlocWall; Floc_Origin[1] + W_FlocChannel; Floc_Origin[2]]
FlocChannelWall_Dim := [L_Floc + 2*T_FlocWall; T_FlocDividingWall; H_Floc]
FlocPort1_Origin := Floc_Origin + [-W_FlocPort; W_FlocChannel; 0 m]
FlocPort2_Origin := Floc_Origin + [-L_Floc; 2*W_FlocChannel + T_FlocDividingWall; 0 m]
FlocPort_Dim := [W_FlocPort; T_FlocDividingWall; H_FlocPort]
SedChannelOpening_Origin := Floc_Origin + [-L_Floc; 0 m; H_Floc]
SedChannelOpening_Dim := [W_SedInletChannelPreWeir; -max(T_SedWall, T_FlocWall); Z_SedChannelBottom - Z_FlocTop]
FlocSlabCut_Origin := Floc_Origin + [T_FlocWall; -T_FlocWall; -T_FlocSlab]
FlocSlabCut_Dim := [
    -2*T_FlocWall - L_Floc;
    2*T_FlocWall + N_FlocChannels*W_FlocChannel + (N_FlocChannels - 1)*T_FlocDividingWall;
    -T_FlocWall
]
FlocEtCut1_Origin := Floc_Origin + [
    -L_Floc - T_FlocWall - zc;
    (N_FlocChannels - 1)*(W_FlocChannel + T_FlocDividingWall);
    -T_FlocSlab - zc
]
FlocEtCut1_Dim := [
    zc + T_FlocWall + S_Fitting/2 + OD_Fitting(ND_EtDrain) + L_EtSlope1 + T_FlocDividingWall;
    W_FlocChannel + T_FlocWall;
    zc + T_FlocSlab + H_Floc + zc
]
FlocEtCut2_Origin := Floc_Origin + [
    -L_Floc + S_Fitting/2 + OD_Fitting(ND_EtDrain) + L_EtSlope1 + T_FlocDividingWall;
    (N_FlocChannels - 1)*(W_FlocChannel + T_FlocDividingWall);
    Z_EtUpperSlab - Z_FlocBottom - T_EtUpperSlab
]
FlocEtCut2_Dim := [L_EtSlope2; W_FlocChannel + T_FlocWall; Z_FlocTop - Z_EtUpperSlab + T_EtUpperSlab]
# Masonry
FlocTank := Tank(Floc_Origin, Floc_Dim, T_FlocWall)
FlocChannelWall := BoxF(FlocChannelWall_Origin, FlocChannelWall_Origin + FlocChannelWall_Dim, [0; 0; 0]*deg)
ArrayFlocWall := ArrayLast(N_FlocChannels - 1, 1, W_FlocChannel + T_FlocDividingWall)
ArrayFlocWall :=
    "" if N_FlocChannels < 20
    ArrayFlocWall
FlocSlabThicken :=
    if T_FlocSlab > T_FlocWall
        BoxF(Floc_Origin + [T_FlocWall; -T_FlocWall; -T_FlocSlab], Floc_Origin + [
            -L_Floc - T_FlocWall;
            N_FlocChannels*W_FlocChannel + (N_FlocChannels - 1)*T_FlocDividingWall + T_FlocWall;
            -T_FlocWall
        ], [0; 0; 0]*deg)
    view("t") otherwise
FlocTankScript := stack(FlocTankLayer, FlocTank, FlocChannelWall, ArrayFlocWall, FlocSlabThicken, Union_All, FlocTankFrz)
# Masonry cuts
FlocPort1 := BoxF(FlocPort1_Origin, FlocPort1_Origin + FlocPort_Dim, [0; 0; 0]*deg)
ArrayFlocPort1 := ArrayLast(N_FlocChannels/2, 1, 2*(W_FlocChannel + T_FlocDividingWall))
ArrayFlocPort1 :=
    "" if N_FlocChannels < 20
    ArrayFlocPort1
FlocPort2 := BoxF(FlocPort2_Origin, FlocPort2_Origin + FlocPort_Dim, [0; 0; 0]*deg)
ArrayFlocPort2 := ArrayLast(N_FlocChannels/2 - 1, 1, 2*(W_FlocChannel + T_FlocDividingWall))
ArrayFlocPort2 :=
    "" if N_FlocChannels < 20
    ArrayFlocPort2
SedChannelOpening := BoxF(SedChannelOpening_Origin, SedChannelOpening_Origin + SedChannelOpening_Dim, [0; 0; 0]*deg)
FlocSlabCut :=
    BoxF(FlocSlabCut_Origin, FlocSlabCut_Origin + FlocSlabCut_Dim, [0; 0; 0]*deg) if T_FlocWall > T_FlocSlab
    view("t") otherwise
FlocEtCut1 := BoxF(FlocEtCut1_Origin, FlocEtCut1_Origin + FlocEtCut1_Dim, [0; 0; 0]*deg)
FlocEtCut2 := BoxF(FlocEtCut2_Origin, FlocEtCut2_Origin + FlocEtCut2_Dim, [0; 0; 0]*deg)
FlocMasonryCutScript :=
    stack(FlocPort1, ArrayFlocPort1, FlocPort2, ArrayFlocPort2, SedChannelOpening, FlocSlabCut, FlocEtCut1, FlocEtCut2, GroupDelete, SubtractFromFlocTank) if N_FlocChannels > 2
    stack(FlocPort1, ArrayFlocPort1, SedChannelOpening, FlocSlabCut, FlocEtCut1, FlocEtCut2, GroupDelete, SubtractFromFlocTank) otherwise
FlocMasonryScript := stack(FlocTankScript, FlocMasonryCutScript)
# Module connector pipes
PS_FlocMod := SDR_13.5
PS_FlocModStr := PSToString(PS_FlocMod)
# Origins and lengths
FlocModConnectorLowA_Origin := Floc_Origin + [
    -S_FlocBaffle + SocketDepth(ND_FlocMod) + max(0 m, ShortTeeLength(ND_FlocMod) - ElbowRadius(ND_FlocMod));
    S_Fitting + OR(ND_FlocMod);
    min(S_FlocModPipeToEdge, Pi_FlocBaffle*S_FlocBaffle/2)
]  # "A" refers to even-numbered channels. "C" refers to the first channel. "B" are odd-numbered channels that are not the first channel.
L_FlocModConnectorLowA := L_Floc - S_FlocBaffle - OR_Fitting(ND_FlocMod) - ElbowRadius(ND_FlocMod) + SocketDepth(ND_FlocMod) + (ShortTeeLength(ND_FlocMod) - ElbowRadius(ND_FlocMod))
FlocModConnectorLowC_Origin := Floc_Origin + [
    -OR_Fitting(ND_FlocMod) - ElbowRadius(ND_FlocMod);
    S_Fitting + OR(ND_FlocMod) + (N_FlocChannels - 1)*(W_FlocChannel + T_FlocDividingWall);
    min(S_FlocModPipeToEdge, Pi_FlocBaffle*S_FlocBaffle/2)
]
L_FlocModConnectorLowC := L_FlocModConnectorLowA - B_FlocBaffle*(N_FlocChannelBaffles - N_FlocFirstChannelBaffles)
FlocModConnectorMidA_Origin := Floc_Origin + [
    -S_FlocBaffle + SocketDepth(ND_FlocMod) + max(0 m, ElbowRadius(ND_FlocMod) - ShortTeeLength(ND_FlocMod));
    S_Fitting + OR(ND_FlocMod);
    H_FlocObs*(N_FlocSpaceExpansions > 1) + (H_FlocBaffleLow + Pi_FlocBaffle*S_FlocBaffle)/2*(N_FlocSpaceExpansions == 1)
]
L_FlocModConnectorMidA := L_Floc - S_FlocBaffle - OR_Fitting(ND_FlocMod) - ShortTeeLength(ND_FlocMod) + SocketDepth(ND_FlocMod)
FlocModConnectorMidC_Origin := Floc_Origin + [
    -OR_Fitting(ND_FlocMod) - ShortTeeLength(ND_FlocMod);
    S_Fitting + OR(ND_FlocMod) + (N_FlocChannels - 1)*(W_FlocChannel + T_FlocDividingWall);
    H_FlocObs*(N_FlocSpaceExpansions > 1) + (H_FlocBaffleLow + Pi_FlocBaffle*S_FlocBaffle)/2*(N_FlocSpaceExpansions == 1)
]
L_FlocModConnectorMidC := L_FlocModConnectorMidA - B_FlocBaffle*(N_FlocChannelBaffles - N_FlocFirstChannelBaffles)
FlocModConnectorHighA_Origin := [FlocModConnectorLowA_Origin[0]; FlocModConnectorLowA_Origin[1]; Z_FlocTop - H_PlantFreeboard]
L_FlocModConnectorHighA := L_FlocModConnectorLowA
FlocModConnectorHighC_Origin := [FlocModConnectorLowC_Origin[0]; FlocModConnectorLowC_Origin[1]; Z_FlocTop - H_PlantFreeboard]
L_FlocModConnectorHighC := L_FlocModConnectorLowC
FlocModVertPipeLowA_Origin := FlocModConnectorLowA_Origin + [ElbowRadius(ND_FlocMod); 0 m; ElbowRadius(ND_FlocMod)]
FlocModVertPipeLowC_Origin := FlocModConnectorLowC_Origin + [ElbowRadius(ND_FlocMod); 0 m; ElbowRadius(ND_FlocMod)]
L_FlocModVertPipeLow := FlocModConnectorMidA_Origin[2] - FlocModConnectorLowA_Origin[2] - ElbowRadius(ND_FlocMod) - TeeLength(ND_FlocMod)/2
FlocModVertPipeMidA_Origin := FlocModConnectorMidA_Origin + [ShortTeeLength(ND_FlocMod); 0 m; TeeLength(ND_FlocMod)/2]
FlocModVertPipeMidC_Origin := FlocModConnectorMidC_Origin + [ShortTeeLength(ND_FlocMod); 0 m; TeeLength(ND_FlocMod)/2]
L_FlocModVertPipeMid := H_FlocObs - TeeLength(ND_FlocMod)
FlocModVertPipeHighA_Origin := FlocModConnectorMidA_Origin + [
    ShortTeeLength(ND_FlocMod);
    0 m;
    TeeLength(ND_FlocMod)/2 + max(N_FlocSpaceExpansions - 2, 0)*H_FlocObs
]
FlocModVertPipeHighC_Origin := FlocModConnectorMidC_Origin + [
    ShortTeeLength(ND_FlocMod);
    0 m;
    TeeLength(ND_FlocMod)/2 + max(N_FlocSpaceExpansions - 2, 0)*H_FlocObs
]
L_FlocModVertPipeHigh := FlocModConnectorHighA_Origin[2] - FlocModConnectorMidA_Origin[2] - ElbowRadius(ND_FlocMod) - TeeLength(ND_FlocMod)/2 - max(N_FlocSpaceExpansions - 2, 0)*H_FlocObs
# Connector pipes in odd-numbered channels (B)
ArrayFlocModYB := ArrayLast(max(N_FlocChannels/2 - 1, 1), 1, 2*(W_FlocChannel + T_FlocDividingWall))
ArrayFlocModYB :=
    "" if N_FlocChannels < 20
    ArrayFlocModYB
FlocModConnectorsHighLowB :=
    local ← view("t")
    for i ∈ 0 .. 2
        PipeLow ← PipeF(FlocModConnectorLowA_Origin + [0 m; i*(W_FlocChannel - 2*S_Fitting - OD(ND_FlocMod))/2 + W_FlocChannel + T_FlocDividingWall; 0 m], L_FlocModConnectorLowA, [0; 0]*deg, ND_FlocMod, PS_FlocMod)
        PipeHigh ← PipeF(FlocModConnectorHighA_Origin + [0 m; i*(W_FlocChannel - 2*S_Fitting - OD(ND_FlocMod))/2 + W_FlocChannel + T_FlocDividingWall; 0 m], L_FlocModConnectorHighA, [0; 0]*deg, ND_FlocMod, PS_FlocMod)
        local ← stack(local, PipeLow, ArrayFlocModYB, PipeHigh, ArrayFlocModYB)
    return local
FlocModConnectorsMidB :=
    local ← view("t")
    for i ∈ 0 .. 2
        for j ∈ 0 .. max(N_FlocSpaceExpansions - 2, 0)
            Pipe ← PipeF(FlocModConnectorMidA_Origin + [
                0 m;
                i*(W_FlocChannel - 2*S_Fitting - OD(ND_FlocMod))/2 + W_FlocChannel + T_FlocDividingWall;
                j*H_FlocObs
            ], L_FlocModConnectorMidA, [0; 0]*deg, ND_FlocMod, PS_FlocMod)
            local ← stack(local, Pipe, ArrayFlocModYB)
    return local
FlocModVertPipesHighLowB :=
    local ← view("t")
    for i ∈ 0 .. 2
        PipeLow1 ← PipeF(FlocModVertPipeLowA_Origin + [0 m; i*(W_FlocChannel - 2*S_Fitting - OD(ND_FlocMod))/2 + W_FlocChannel + T_FlocDividingWall; 0 m], L_FlocModVertPipeLow, [0; 90]*deg, ND_FlocMod, PS_FlocMod)
        PipeLow2 ← PipeF(FlocModVertPipeLowA_Origin + [
            -L_FlocModConnectorLowA - 2*ElbowRadius(ND_FlocMod);
            i*(W_FlocChannel - 2*S_Fitting - OD(ND_FlocMod))/2 + W_FlocChannel + T_FlocDividingWall;
            0 m
        ], L_FlocModVertPipeLow, [0; 90]*deg, ND_FlocMod, PS_FlocMod)
        PipeHigh1 ← PipeF(FlocModVertPipeHighA_Origin + [0 m; i*(W_FlocChannel - 2*S_Fitting - OD(ND_FlocMod))/2 + W_FlocChannel + T_FlocDividingWall; 0 m], L_FlocModVertPipeHigh, [0; 90]*deg, ND_FlocMod, PS_FlocMod)
        PipeHigh2 ← PipeF(FlocModVertPipeHighA_Origin + [
            -L_FlocModConnectorLowA - 2*ElbowRadius(ND_FlocMod);
            i*(W_FlocChannel - 2*S_Fitting - OD(ND_FlocMod))/2 + W_FlocChannel + T_FlocDividingWall;
            0 m
        ], L_FlocModVertPipeHigh, [0; 90]*deg, ND_FlocMod, PS_FlocMod)
        local ← stack(local, PipeLow1, ArrayFlocModYB, PipeLow2, ArrayFlocModYB, PipeHigh1, ArrayFlocModYB, PipeHigh2, ArrayFlocModYB)
    return local
FlocModVertPipesMidB :=
    local ← view("t")
    for i ∈ 0 .. 2
        for j ∈ 0 .. max(N_FlocSpaceExpansions - 2, 0)
            Pipe1 ← PipeF(FlocModVertPipeMidA_Origin + [
                0 m;
                i*(W_FlocChannel - 2*S_Fitting - OD(ND_FlocMod))/2 + W_FlocChannel + T_FlocDividingWall;
                j*H_FlocObs
            ], L_FlocModVertPipeMid, [0; 90]*deg, ND_FlocMod, PS_FlocMod)
            Pipe2 ← PipeF(FlocModVertPipeMidA_Origin + [
                -L_FlocModConnectorLowA - 2*ElbowRadius(ND_FlocMod);
                i*(W_FlocChannel - 2*S_Fitting - OD(ND_FlocMod))/2 + W_FlocChannel + T_FlocDividingWall;
                j*H_FlocObs
            ], L_FlocModVertPipeMid, [0; 90]*deg, ND_FlocMod, PS_FlocMod)
            local ← stack(local, Pipe1, ArrayFlocModYB, Pipe2, ArrayFlocModYB)
    return local
MirrorFlocModX := MirrorAll([Floc_Origin[0] - L_Floc/2; Floc_Origin[1]], [Floc_Origin[0] - L_Floc/2; Floc_Origin[1] + zc], "y")
FlocModConnectorBScript :=
    stack(FlocModConnectorsHighLowB, FlocModConnectorsMidB, FlocModVertPipesHighLowB, FlocModVertPipesMidB, MirrorFlocModX) if N_FlocChannels > 2 and N_FlocSpaceExpansions > 2
    stack(FlocModConnectorsHighLowB, FlocModConnectorsMidB, FlocModVertPipesHighLowB, MirrorFlocModX) if N_FlocChannels > 2 and N_FlocSpaceExpansions ≤ 2
    view("t") if N_FlocChannels ≤ 2
# Connector pipes in first channel (C)
FlocModConnectorsHighLowC :=
    local ← view("t")
    for i ∈ 0 .. 2
        PipeLow ← PipeF(FlocModConnectorLowC_Origin + [0 m; i*(W_FlocChannel - 2*S_Fitting - OD(ND_FlocMod))/2; 0 m], L_FlocModConnectorLowC, [0; 0]*deg, ND_FlocMod, PS_FlocMod)
        PipeHigh ← PipeF(FlocModConnectorHighC_Origin + [0 m; i*(W_FlocChannel - 2*S_Fitting - OD(ND_FlocMod))/2; 0 m], L_FlocModConnectorHighC, [0; 0]*deg, ND_FlocMod, PS_FlocMod)
        local ← stack(local, PipeLow, PipeHigh)
    return local
FlocModConnectorsMidC :=
    local ← view("t")
    for i ∈ 0 .. 2
        for j ∈ 0 .. max(N_FlocSpaceExpansions - 2, 0)
            Pipe ← PipeF(FlocModConnectorMidC_Origin + [0 m; i*(W_FlocChannel - 2*S_Fitting - OD(ND_FlocMod))/2; j*H_FlocObs], L_FlocModConnectorMidC, [0; 0]*deg, ND_FlocMod, PS_FlocMod)
            local ← stack(local, Pipe)
    return local
FlocModVertPipesHighLowC :=
    local ← view("t")
    for i ∈ 0 .. 2
        PipeLow1 ← PipeF(FlocModVertPipeLowC_Origin + [0 m; i*(W_FlocChannel - 2*S_Fitting - OD(ND_FlocMod))/2; 0 m], L_FlocModVertPipeLow, [0; 90]*deg, ND_FlocMod, PS_FlocMod)
        PipeLow2 ← PipeF(FlocModVertPipeLowC_Origin + [
            -L_FlocModConnectorLowC - 2*ElbowRadius(ND_FlocMod);
            i*(W_FlocChannel - 2*S_Fitting - OD(ND_FlocMod))/2;
            0 m
        ], L_FlocModVertPipeLow, [0; 90]*deg, ND_FlocMod, PS_FlocMod)
        PipeHigh1 ← PipeF(FlocModVertPipeHighC_Origin + [0 m; i*(W_FlocChannel - 2*S_Fitting - OD(ND_FlocMod))/2; 0 m], L_FlocModVertPipeHigh, [0; 90]*deg, ND_FlocMod, PS_FlocMod)
        PipeHigh2 ← PipeF(FlocModVertPipeHighC_Origin + [
            -L_FlocModConnectorLowC - 2*ElbowRadius(ND_FlocMod);
            i*(W_FlocChannel - 2*S_Fitting - OD(ND_FlocMod))/2;
            0 m
        ], L_FlocModVertPipeHigh, [0; 90]*deg, ND_FlocMod, PS_FlocMod)
        local ← stack(local, PipeLow1, PipeLow2, PipeHigh1, PipeHigh2)
    return local
FlocModVertPipesMidC :=
    local ← view("t")
    for i ∈ 0 .. 2
        for j ∈ 0 .. max(N_FlocSpaceExpansions - 2, 0)
            Pipe1 ← PipeF(FlocModVertPipeMidC_Origin + [0 m; i*(W_FlocChannel - 2*S_Fitting - OD(ND_FlocMod))/2; j*H_FlocObs], L_FlocModVertPipeMid, [0; 90]*deg, ND_FlocMod, PS_FlocMod)
            Pipe2 ← PipeF(FlocModVertPipeMidC_Origin + [
                -L_FlocModConnectorLowC - 2*ElbowRadius(ND_FlocMod);
                i*(W_FlocChannel - 2*S_Fitting - OD(ND_FlocMod))/2;
                j*H_FlocObs
            ], L_FlocModVertPipeMid, [0; 90]*deg, ND_FlocMod, PS_FlocMod)
            local ← stack(local, Pipe1, Pipe2)
    return local
FlocModConnectorCScript :=
    stack(FlocModConnectorsHighLowC, FlocModConnectorsMidC, FlocModVertPipesHighLowC, FlocModVertPipesMidC) if N_FlocSpaceExpansions > 1
    stack(FlocModConnectorsHighLowC, FlocModConnectorsMidC, FlocModVertPipesHighLowC) otherwise
# Connector pipes in even-numbered channels (A)
ArrayFlocModYA := ArrayLast(N_FlocChannels/2, 1, 2*(W_FlocChannel + T_FlocDividingWall))
ArrayFlocModYA :=
    "" if N_FlocChannels < 20
    ArrayFlocModYA
FlocModConnectorsHighLowA :=
    local ← view("t")
    for i ∈ 0 .. 2
        PipeLow ← PipeF(FlocModConnectorLowA_Origin + [0 m; i*(W_FlocChannel - 2*S_Fitting - OD(ND_FlocMod))/2; 0 m], L_FlocModConnectorLowA, [0; 0]*deg, ND_FlocMod, PS_FlocMod)
        PipeHigh ← PipeF(FlocModConnectorHighA_Origin + [0 m; i*(W_FlocChannel - 2*S_Fitting - OD(ND_FlocMod))/2; 0 m], L_FlocModConnectorHighA, [0; 0]*deg, ND_FlocMod, PS_FlocMod)
        local ← stack(local, PipeLow, ArrayFlocModYA, PipeHigh, ArrayFlocModYA)
    return local
FlocModConnectorsMidA :=
    local ← view("t")
    for i ∈ 0 .. 2
        for j ∈ 0 .. max(N_FlocSpaceExpansions - 2, 0)
            Pipe ← PipeF(FlocModConnectorMidA_Origin + [0 m; i*(W_FlocChannel - 2*S_Fitting - OD(ND_FlocMod))/2; j*H_FlocObs], L_FlocModConnectorMidA, [0; 0]*deg, ND_FlocMod, PS_FlocMod)
            local ← stack(local, Pipe, ArrayFlocModYA)
    return local
FlocModVertPipesLowHighA :=
    local ← view("t")
    for i ∈ 0 .. 2
        PipeLow1 ← PipeF(FlocModVertPipeLowA_Origin + [0 m; i*(W_FlocChannel - 2*S_Fitting - OD(ND_FlocMod))/2; 0 m], L_FlocModVertPipeLow, [0; 90]*deg, ND_FlocMod, PS_FlocMod)
        PipeLow2 ← PipeF(FlocModVertPipeLowA_Origin + [
            -L_FlocModConnectorLowA - 2*ElbowRadius(ND_FlocMod);
            i*(W_FlocChannel - 2*S_Fitting - OD(ND_FlocMod))/2;
            0 m
        ], L_FlocModVertPipeLow, [0; 90]*deg, ND_FlocMod, PS_FlocMod)
        PipeHigh1 ← PipeF(FlocModVertPipeHighA_Origin + [0 m; i*(W_FlocChannel - 2*S_Fitting - OD(ND_FlocMod))/2; 0 m], L_FlocModVertPipeHigh, [0; 90]*deg, ND_FlocMod, PS_FlocMod)
        PipeHigh2 ← PipeF(FlocModVertPipeHighA_Origin + [
            -L_FlocModConnectorLowA - 2*ElbowRadius(ND_FlocMod);
            i*(W_FlocChannel - 2*S_Fitting - OD(ND_FlocMod))/2;
            0 m
        ], L_FlocModVertPipeHigh, [0; 90]*deg, ND_FlocMod, PS_FlocMod)
        local ← stack(local, PipeLow1, ArrayFlocModYA, PipeLow2, ArrayFlocModYA, PipeHigh1, ArrayFlocModYA, PipeHigh2, ArrayFlocModYA)
    return local
FlocModVertPipesMidA :=
    local ← view("t")
    for i ∈ 0 .. 2
        for j ∈ 0 .. max(N_FlocSpaceExpansions - 2, 0)
            Pipe1 ← PipeF(FlocModVertPipeMidA_Origin + [0 m; i*(W_FlocChannel - 2*S_Fitting - OD(ND_FlocMod))/2; j*H_FlocObs], L_FlocModVertPipeMid, [0; 90]*deg, ND_FlocMod, PS_FlocMod)
            Pipe2 ← PipeF(FlocModVertPipeMidA_Origin + [
                -L_FlocModConnectorLowA - 2*ElbowRadius(ND_FlocMod);
                i*(W_FlocChannel - 2*S_Fitting - OD(ND_FlocMod))/2;
                j*H_FlocObs
            ], L_FlocModVertPipeMid, [0; 90]*deg, ND_FlocMod, PS_FlocMod)
            local ← stack(local, Pipe1, ArrayFlocModYA, Pipe2, ArrayFlocModYA)
    return local
FlocModConnectorAScript :=
    stack(FlocModConnectorsHighLowA, FlocModConnectorsMidA, FlocModVertPipesLowHighA, FlocModVertPipesMidA) if N_FlocSpaceExpansions > 1
    stack(FlocModConnectorsHighLowA, FlocModConnectorsMidA, FlocModVertPipesLowHighA) otherwise
FlocModConnectorScript := stack(FlocModHorizPipeLayer, FlocModConnectorBScript, FlocModConnectorCScript, FlocModConnectorAScript, FlocModHorizPipeFrz)
# Module spacers
PS_FlocSpacer := SDR_17
PS_FlocSpacerStr := PSToString(PS_FlocSpacer)
# Origins and lengths
FlocModSpacerLowA_Origin := FlocModConnectorLowA_Origin + [-SocketDepth(ND_FlocMod); 0 m; 0 m]
# A refers to even-numbered channels. C refers to the first channel. B are odd-numbered channels that are not the first channel.
L_FlocModSpacerLowA := L_FlocModConnectorLowA - 2*SocketDepth(ND_FlocMod)
FlocModSpacerLowC_Origin := FlocModConnectorLowC_Origin + [-SocketDepth(ND_FlocMod); 0 m; 0 m]
L_FlocModSpacerLowC := L_FlocModConnectorLowC - 2*SocketDepth(ND_FlocMod)
FlocModSpacerMidA_Origin := FlocModConnectorMidA_Origin + [-SocketDepth(ND_FlocMod); 0 m; 0 m]
L_FlocModSpacerMidA := L_FlocModConnectorMidA - 2*SocketDepth(ND_FlocMod)
FlocModSpacerMidC_Origin := FlocModConnectorMidC_Origin + [-SocketDepth(ND_FlocMod); 0 m; 0 m]
L_FlocModSpacerMidC := L_FlocModConnectorMidC - 2*SocketDepth(ND_FlocMod)
FlocModSpacerHighA_Origin := FlocModConnectorHighA_Origin + [-SocketDepth(ND_FlocMod); 0 m; 0 m]
L_FlocModSpacerHighA := L_FlocModConnectorHighA - 2*SocketDepth(ND_FlocMod)
FlocModSpacerHighC_Origin := FlocModConnectorHighC_Origin + [-SocketDepth(ND_FlocMod); 0 m; 0 m]
L_FlocModSpacerHighC := L_FlocModConnectorHighC - 2*SocketDepth(ND_FlocMod)
# Spacer pipes in odd-numbered channels (B)
FlocModSpacersHighLowB :=
    local ← view("t")
    for i ∈ 0 .. 2
        PipeLow ← PipeF(FlocModSpacerLowA_Origin + [0 m; i*(W_FlocChannel - 2*S_Fitting - OD(ND_FlocMod))/2 + W_FlocChannel + T_FlocDividingWall; 0 m], L_FlocModSpacerLowA, [0; 0]*deg, ND_FlocSpacer, PS_FlocSpacer)
        PipeHigh ← PipeF(FlocModSpacerHighA_Origin + [0 m; i*(W_FlocChannel - 2*S_Fitting - OD(ND_FlocMod))/2 + W_FlocChannel + T_FlocDividingWall; 0 m], L_FlocModSpacerHighA, [0; 0]*deg, ND_FlocSpacer, PS_FlocSpacer)
        local ← stack(local, PipeLow, ArrayFlocModYB, PipeHigh, ArrayFlocModYB)
    return local
FlocModSpacersMidB :=
    local ← view("t")
    for i ∈ 0 .. 2
        for j ∈ 0 .. max(N_FlocSpaceExpansions - 2, 0)
            PipeMid ← PipeF(FlocModSpacerMidA_Origin + [
                0 m;
                i*(W_FlocChannel - 2*S_Fitting - OD(ND_FlocMod))/2 + W_FlocChannel + T_FlocDividingWall;
                j*H_FlocObs
            ], L_FlocModSpacerMidA, [0; 0]*deg, ND_FlocSpacer, PS_FlocSpacer)
        local ← stack(local, PipeMid, ArrayFlocModYB)
    return local
FlocModSpacerBScript :=
    stack(FlocModSpacersHighLowB, FlocModSpacersMidB, MirrorFlocModX) if N_FlocChannels > 2
    view("t") otherwise
# Spacer pipes in first channel (C)
FlocModSpacersHighLowC :=
    local ← view("t")
    for i ∈ 0 .. 2
        PipeLow ← PipeF(FlocModSpacerLowC_Origin + [0 m; i*(W_FlocChannel - 2*S_Fitting - OD(ND_FlocMod))/2; 0 m], L_FlocModSpacerLowC, [0; 0]*deg, ND_FlocSpacer, PS_FlocSpacer)
        PipeHigh ← PipeF(FlocModSpacerHighC_Origin + [0 m; i*(W_FlocChannel - 2*S_Fitting - OD(ND_FlocMod))/2; 0 m], L_FlocModSpacerHighC, [0; 0]*deg, ND_FlocSpacer, PS_FlocSpacer)
        local ← stack(local, PipeLow, PipeHigh)
    return local
FlocModSpacersMidC :=
    local ← view("t")
    for i ∈ 0 .. 2
        for j ∈ 0 .. max(N_FlocSpaceExpansions - 2, 0)
            Pipe ← PipeF(FlocModSpacerMidC_Origin + [0 m; i*(W_FlocChannel - 2*S_Fitting - OD(ND_FlocMod))/2; j*H_FlocObs], L_FlocModSpacerMidC, [0; 0]*deg, ND_FlocSpacer, PS_FlocSpacer)
            local ← stack(local, Pipe)
    return local
FlocModSpacerCScript := stack(FlocModSpacersHighLowC, FlocModSpacersMidC)
# Connector pipes in even-numbered channels (A)
FlocModSpacersHighLowA :=
    local ← view("t")
    for i ∈ 0 .. 2
        PipeLow ← PipeF(FlocModSpacerLowA_Origin + [0 m; i*(W_FlocChannel - 2*S_Fitting - OD(ND_FlocMod))/2; 0 m], L_FlocModSpacerLowA, [0; 0]*deg, ND_FlocSpacer, PS_FlocSpacer)
        PipeHigh ← PipeF(FlocModSpacerHighA_Origin + [0 m; i*(W_FlocChannel - 2*S_Fitting - OD(ND_FlocMod))/2; 0 m], L_FlocModSpacerHighA, [0; 0]*deg, ND_FlocSpacer, PS_FlocSpacer)
        local ← stack(local, PipeLow, ArrayFlocModYA, PipeHigh, ArrayFlocModYA)
    return local
FlocModSpacersMidA :=
    local ← view("t")
    for i ∈ 0 .. 2
        for j ∈ 0 .. max(N_FlocSpaceExpansions - 2, 0)
            PipeMid ← PipeF(FlocModSpacerMidA_Origin + [0 m; i*(W_FlocChannel - 2*S_Fitting - OD(ND_FlocMod))/2; j*H_FlocObs], L_FlocModSpacerMidA, [0; 0]*deg, ND_FlocSpacer, PS_FlocSpacer)
            local ← stack(local, PipeMid, ArrayFlocModYA)
    return local
FlocModSpacerAScript := stack(FlocModSpacersHighLowA, FlocModSpacersMidA)
FlocModSpacerScript := stack(FlocModSpacerLayer, FlocModSpacerBScript, FlocModSpacerCScript, FlocModSpacerAScript, FlocModSpacerFrz)
# Baffles
# Baffle origins and dimensions
FlocBaffleLow_Origin(N) := Floc_Origin + [-S_FlocBaffle; N*(W_FlocChannel + T_FlocDividingWall); 0 m]
FlocBaffleLow_Dim := [-T_SedPlate; W_FlocChannel; H_FlocBaffleLow]
FlocBaffleHigh_Origin(N) := Floc_Origin + [-2*S_FlocBaffle - T_SedPlate; N*(W_FlocChannel + T_FlocDividingWall); Pi_FlocBaffle*S_FlocBaffle]
FlocBaffleHigh_Dim := [-T_SedPlate; W_FlocChannel; H_FlocBaffleHigh]
# Draw and array baffles
FlocBafflesLow :=
    Local ← view("t")
    for i ∈ 0 .. N_FlocChannels - 1
        Baffle ← BoxF(FlocBaffleLow_Origin(i), FlocBaffleLow_Origin(i) + FlocBaffleLow_Dim, [0; 0; 0]*deg)
        Array ←
            ArrayLast(1, N_FlocLastChannelBaffles/2, -2*B_FlocBaffle) if i == 0
            ArrayLast(1, (N_FlocFirstChannelBaffles + 1)/2, -2*B_FlocBaffle) if i == (N_FlocChannels - 1)
            ArrayLast(1, (N_FlocChannelBaffles + 1)/2, -2*B_FlocBaffle) otherwise
        Local ← stack(Local, Baffle, Array)
    return Local
FlocBafflesHigh :=
    Local ← view("t")
    for i ∈ 0 .. N_FlocChannels - 1
        Baffle ← BoxF(FlocBaffleHigh_Origin(i), FlocBaffleHigh_Origin(i) + FlocBaffleHigh_Dim, [0; 0; 0]*deg)
        Array ←
            ArrayLast(1, N_FlocLastChannelBaffles/2, -2*B_FlocBaffle) if i == 0
            ArrayLast(1, (N_FlocFirstChannelBaffles - 1)/2, -2*B_FlocBaffle) if i == (N_FlocChannels - 1)
            ArrayLast(1, (N_FlocChannelBaffles - 1)/2, -2*B_FlocBaffle) otherwise
        Local ← stack(Local, Baffle, Array)
    return Local
FlocBaffleScript := stack(FlocBafflesLow, FlocBafflesHigh, GroupDelete, SubtractFromFlocModSpacer, FlocBaffleLayer, FlocBafflesLow, FlocBafflesHigh, FlocBaffleFrz)
# Obstacles
FlocObstacle1_Origin := FlocBaffleLow_Origin(0) + [-T_FlocBaffle - W_FlocObstacleWake/2 + OR(ND_FlocObs); S_FlocObsToWallGap; H_FlocObs]
FlocObstacle2_Origin := FlocBaffleLow_Origin(0) + [
    -T_FlocBaffle - S_FlocBaffle + W_FlocObstacleWake/2 - OR(ND_FlocObs);
    S_FlocObsToWallGap;
    H_FlocObs
]
# First channel
FlocObsFirstChannel1 := PipeF(FlocObstacle1_Origin + [0 m; (N_FlocChannels - 1)*(W_FlocChannel + T_FlocDividingWall); 0 m], W_FlocChannel - 2*S_FlocObsToWallGap, [-90; 0]*deg, ND_FlocObs, PS_FlocObs)
FlocObsFirstChannel2 := PipeF(FlocObstacle2_Origin + [0 m; (N_FlocChannels - 1)*(W_FlocChannel + T_FlocDividingWall); 0 m], W_FlocChannel - 2*S_FlocObsToWallGap, [-90; 0]*deg, ND_FlocObs, PS_FlocObs)
FlocObsFirstChannelCut1 := BoxF(FlocObstacle1_Origin + [
    -OR(ND_FlocObs) + W_FlocObstacleWake/2;
    (N_FlocChannels - 1)*(W_FlocChannel + T_FlocDividingWall);
    -OR(ND_FlocObs) - zc
], FlocObstacle1_Origin + [
    OR(ND_FlocObs) + zc;
    (N_FlocChannels - 1)*(W_FlocChannel + T_FlocDividingWall) + W_FlocChannel;
    OR(ND_FlocObs) + zc
], [0; 0; 0]*deg)
FlocObsFirstChannelCut2 := BoxF(FlocObstacle2_Origin + [
    OR(ND_FlocObs) - W_FlocObstacleWake/2;
    (N_FlocChannels - 1)*(W_FlocChannel + T_FlocDividingWall);
    -OR(ND_FlocObs) - zc
], FlocObstacle2_Origin + [
    -OR(ND_FlocObs) - zc;
    (N_FlocChannels - 1)*(W_FlocChannel + T_FlocDividingWall) + W_FlocChannel;
    OR(ND_FlocObs) + zc
], [0; 0; 0]*deg)
FlocModObsFirstChannelPipeScript := stack(FlocModObsFirstLayer, FlocObsFirstChannel1, FlocObsFirstChannel2, FlocModObsFirstFrz, FlocObsFirstChannelCut1, FlocObsFirstChannelCut2, GroupDelete, SubtractFromFlocModObsFirst)
FlocObsFirstChannelSpacerCut1 := BoxF(FlocObstacle1_Origin + [-OR(ND_FlocObs); (N_FlocChannels - 1)*(W_FlocChannel + T_FlocDividingWall); -OR(ND_FlocObs)], FlocObstacle1_Origin + [
    -OR(ND_FlocObs) + T_Pipe(ND_FlocObs, PS_FlocObs) + (IR(ND_FlocObs, PS_FlocObs) - sqrt(IR(ND_FlocObs, SDR_41)^2 - OR(ND_FlocSpacer)^2));
    (N_FlocChannels - 1)*(W_FlocChannel + T_FlocDividingWall) + W_FlocChannel;
    OR(ND_FlocObs)
], [0; 0; 0]*deg)
FlocObsFirstChannelSpacerCut2 := BoxF(FlocObstacle2_Origin + [OR(ND_FlocObs); (N_FlocChannels - 1)*(W_FlocChannel + T_FlocDividingWall); -OR(ND_FlocObs)], FlocObstacle2_Origin + [
    OR(ND_FlocObs) - T_Pipe(ND_FlocObs, PS_FlocObs) - (IR(ND_FlocObs, PS_FlocObs) - sqrt(IR(ND_FlocObs, SDR_41)^2 - OR(ND_FlocSpacer)^2));
    (N_FlocChannels - 1)*(W_FlocChannel + T_FlocDividingWall) + W_FlocChannel;
    OR(ND_FlocObs)
], [0; 0; 0]*deg)
ArrayFlocObsFirstChannelX := array_all(1, N_FlocFirstChannelBaffles - 1, -B_FlocBaffle)
ArrayFlocObsZ := stack(view("f"), array_all(max(1, N_FlocSpaceExpansions - 1), 1, H_FlocObs), view("t"))
FlocObsFirstChannelScript := stack(FlocModObsFirstChannelPipeScript, FlocObsFirstChannelSpacerCut1, FlocObsFirstChannelSpacerCut2, ArrayFlocObsFirstChannelX, ArrayFlocObsZ, GroupDelete, SubtractFromFlocModSpacer, SelectFlocModObsFirst, ArrayFlocObsFirstChannelX, ArrayFlocObsZ, FlocModObsFirstFrz)
# Last channel
FlocObsLastChannel1 := PipeF(FlocObstacle1_Origin, W_FlocChannel - 2*S_FlocObsToWallGap, [-90; 0]*deg, ND_FlocObs, PS_FlocObs)
FlocObsLastChannel2 := PipeF(FlocObstacle2_Origin, W_FlocChannel - 2*S_FlocObsToWallGap, [-90; 0]*deg, ND_FlocObs, PS_FlocObs)
FlocObsLastChannelCut1 := BoxF(FlocObstacle1_Origin + [-OR(ND_FlocObs) + W_FlocObstacleWake/2; 0 m; -OR(ND_FlocObs) - zc], FlocObstacle1_Origin + [OR(ND_FlocObs) + zc; W_FlocChannel; OR(ND_FlocObs) + zc], [0; 0; 0]*deg)
FlocObsLastChannelCut2 := BoxF(FlocObstacle2_Origin + [OR(ND_FlocObs) - W_FlocObstacleWake/2; 0 m; -OR(ND_FlocObs) - zc], FlocObstacle2_Origin + [-OR(ND_FlocObs) - zc; W_FlocChannel; OR(ND_FlocObs) + zc], [0; 0; 0]*deg)
FlocModObsLastChannelPipeScript := stack(FlocModObsLastLayer, FlocObsLastChannel1, FlocObsLastChannel2, FlocModObsLastFrz, FlocObsLastChannelCut1, FlocObsLastChannelCut2, GroupDelete, SubtractFromFlocModObsLast)
FlocObsLastChannelSpacerCut1 := BoxF(FlocObstacle1_Origin + [-OR(ND_FlocObs); 0 m; -OR(ND_FlocObs)], FlocObstacle1_Origin + [
    -OR(ND_FlocObs) + T_Pipe(ND_FlocObs, PS_FlocObs) + (IR(ND_FlocObs, PS_FlocObs) - sqrt(IR(ND_FlocObs, PS_FlocObs)^2 - OR(ND_FlocSpacer)^2));
    W_FlocChannel;
    OR(ND_FlocObs)
], [0; 0; 0]*deg)
FlocObsLastChannelSpacerCut2 := BoxF(FlocObstacle2_Origin + [OR(ND_FlocObs); 0 m; -OR(ND_FlocObs)], FlocObstacle2_Origin + [
    OR(ND_FlocObs) - T_Pipe(ND_FlocObs, PS_FlocObs) - (IR(ND_FlocObs, PS_FlocObs) - sqrt(IR(ND_FlocObs, PS_FlocObs)^2 - OR(ND_FlocSpacer)^2));
    W_FlocChannel;
    OR(ND_FlocObs)
], [0; 0; 0]*deg)
ArrayFlocObsLastChannelX := array_all(1, N_FlocLastChannelBaffles - 1, -B_FlocBaffle)
FlocObsLastChannelScript := stack(FlocModObsLastChannelPipeScript, FlocObsLastChannelSpacerCut1, FlocObsLastChannelSpacerCut2, ArrayFlocObsLastChannelX, ArrayFlocObsZ, GroupDelete, SubtractFromFlocModSpacer, SelectFlocModObsLast, ArrayFlocObsLastChannelX, ArrayFlocObsZ, FlocModObsLastFrz)
# Middle channels
FlocObsMidChannel1 := PipeF(FlocObstacle1_Origin + [0 m; W_FlocChannel + T_FlocDividingWall; 0 m], W_FlocChannel - 2*S_FlocObsToWallGap, [-90; 0]*deg, ND_FlocObs, PS_FlocObs)
FlocObsMidChannel2 := PipeF(FlocObstacle2_Origin + [0 m; W_FlocChannel + T_FlocDividingWall; 0 m], W_FlocChannel - 2*S_FlocObsToWallGap, [-90; 0]*deg, ND_FlocObs, PS_FlocObs)
FlocObsMidChannelCut1 := BoxF(FlocObstacle1_Origin + [-OR(ND_FlocObs) + W_FlocObstacleWake/2; W_FlocChannel + T_FlocDividingWall; -OR(ND_FlocObs) - zc], FlocObstacle1_Origin + [OR(ND_FlocObs) + zc; 2*W_FlocChannel + T_FlocDividingWall; OR(ND_FlocObs) + zc], [0; 0; 0]*deg)
FlocObsMidChannelCut2 := BoxF(FlocObstacle2_Origin + [OR(ND_FlocObs) - W_FlocObstacleWake/2; W_FlocChannel + T_FlocDividingWall; -OR(ND_FlocObs) - zc], FlocObstacle2_Origin + [-OR(ND_FlocObs) - zc; 2*W_FlocChannel + T_FlocDividingWall; OR(ND_FlocObs) + zc], [0; 0; 0]*deg)
FlocModObsMidChannelPipeScript := stack(FlocModObsLayer, FlocObsMidChannel1, FlocObsMidChannel2, FlocModObsFrz, FlocObsMidChannelCut1, FlocObsMidChannelCut2, GroupDelete, SubtractFromFlocModObs)
FlocObsMidChannelSpacerCut1 := BoxF(FlocObstacle1_Origin + [-OR(ND_FlocObs); W_FlocChannel + T_FlocDividingWall; -OR(ND_FlocObs)], FlocObstacle1_Origin + [
    -OR(ND_FlocObs) + T_Pipe(ND_FlocObs, PS_FlocObs) + (IR(ND_FlocObs, PS_FlocObs) - sqrt(IR(ND_FlocObs, PS_FlocObs)^2 - OR(ND_FlocSpacer)^2));
    2*W_FlocChannel + T_FlocDividingWall;
    OR(ND_FlocObs)
], [0; 0; 0]*deg)
FlocObsMidChannelSpacerCut2 := BoxF(FlocObstacle2_Origin + [OR(ND_FlocObs); W_FlocChannel + T_FlocDividingWall; -OR(ND_FlocObs)], FlocObstacle2_Origin + [
    OR(ND_FlocObs) - T_Pipe(ND_FlocObs, PS_FlocObs) - (IR(ND_FlocObs, PS_FlocObs) - sqrt(IR(ND_FlocObs, PS_FlocObs)^2 - OR(ND_FlocSpacer)^2));
    2*W_FlocChannel + T_FlocDividingWall;
    OR(ND_FlocObs)
], [0; 0; 0]*deg)
ArrayFlocObsMidChannelX := array_all(1, N_FlocChannelBaffles - 1, -B_FlocBaffle)
ArrayFlocObsMidChannelY := array_all(max(1, N_FlocChannels - 2), 1, W_FlocChannel + T_FlocDividingWall)
FlocObsMidChannelScript :=
    stack(FlocModObsMidChannelPipeScript, FlocObsMidChannelSpacerCut1, FlocObsMidChannelSpacerCut2, ArrayFlocObsMidChannelX, ArrayFlocObsZ, ArrayFlocObsMidChannelY, GroupDelete, SubtractFromFlocModSpacer, SelectFlocModObs, ArrayFlocObsMidChannelX, ArrayFlocObsZ, ArrayFlocObsMidChannelY, FlocModObsFrz) if N_FlocChannels > 2
    view("t") otherwise
FlocObstacleScript :=
    stack(FlocObsFirstChannelScript, FlocObsLastChannelScript, FlocObsMidChannelScript) if N_FlocSpaceExpansions > 1
    view("t") otherwise
# Module fittings
# Origins
FlocModElbowLowA_Origin := FlocModConnectorLowA_Origin
FlocModElbowHighA_Origin := FlocModConnectorHighA_Origin
FlocModTeeA_Origin := FlocModConnectorMidA_Origin
FlocModElbowLowC_Origin := FlocModConnectorLowC_Origin
FlocModElbowHighC_Origin := FlocModConnectorHighC_Origin
FlocModTeeC_Origin := FlocModConnectorMidC_Origin
# Floc fittings B (odd-numbered channels not first)
ArrayFlocModTeeZ := stack(view("f"), ArrayLast(max(N_FlocSpaceExpansions - 2, 1), 1, H_FlocObs), view("t"))
FlocElbowsLowB :=
    local ← view("t")
    for i ∈ 0 .. 2
        Elbow1 ← ElbowF(FlocModElbowLowA_Origin + [0 m; i*(W_FlocChannel - 2*S_Fitting - OD(ND_FlocMod))/2 + W_FlocChannel + T_FlocDividingWall; 0 m], [-90; 0; 90]*deg, ND_FlocMod, PS_FlocMod)
        Elbow2 ← ElbowF(FlocModElbowLowA_Origin + [
            -L_FlocModConnectorLowA;
            i*(W_FlocChannel - 2*S_Fitting - OD(ND_FlocMod))/2 + W_FlocChannel + T_FlocDividingWall;
            0 m
        ], [90; 0; -90]*deg, ND_FlocMod, PS_FlocMod)
        local ← stack(local, Elbow1, ArrayFlocModYB, Elbow2, ArrayFlocModYB)
    return local
FlocTeesB :=
    local ← view("t")
    for i ∈ 0 .. 2
        for j ∈ 0 .. max(0, N_FlocSpaceExpansions - 2)
            Tee1 ← TeeF(FlocModTeeA_Origin + [
                0 m;
                i*(W_FlocChannel - 2*S_Fitting - OD(ND_FlocMod))/2 + W_FlocChannel + T_FlocDividingWall;
                j*H_FlocObs
            ], [90; 0; 90]*deg, ND_FlocMod, PS_FlocMod)
            Tee2 ← TeeF(FlocModTeeA_Origin + [
                -L_FlocModConnectorMidA;
                i*(W_FlocChannel - 2*S_Fitting - OD(ND_FlocMod))/2 + W_FlocChannel + T_FlocDividingWall;
                j*H_FlocObs
            ], [-90; 0; 90]*deg, ND_FlocMod, PS_FlocMod)
            local ← stack(local, Tee1, ArrayFlocModYB, Tee2, ArrayFlocModYB)
    return local
FlocElbowsHighB :=
    local ← view("t")
    for i ∈ 0 .. 2
        Elbow1 ← ElbowF(FlocModElbowHighA_Origin + [0 m; i*(W_FlocChannel - 2*S_Fitting - OD(ND_FlocMod))/2 + W_FlocChannel + T_FlocDividingWall; 0 m], [-90; 0; -90]*deg, ND_FlocMod, PS_FlocMod)
        Elbow2 ← ElbowF(FlocModElbowHighA_Origin + [
            -L_FlocModConnectorHighA;
            i*(W_FlocChannel - 2*S_Fitting - OD(ND_FlocMod))/2 + W_FlocChannel + T_FlocDividingWall;
            0 m
        ], [90; 0; 90]*deg, ND_FlocMod, PS_FlocMod)
        local ← stack(local, Elbow1, ArrayFlocModYB, Elbow2, ArrayFlocModYB)
    return local
FlocFittingBScript :=
    stack(FlocElbowsLowB, FlocTeesB, FlocElbowsHighB, MirrorFlocModX) if N_FlocChannels > 2
    view("t") otherwise
# Floc fittings C (first channel)
FlocElbowsLowC :=
    local ← view("t")
    for i ∈ 0 .. 2
        Elbow1 ← ElbowF(FlocModElbowLowC_Origin + [0 m; i*(W_FlocChannel - 2*S_Fitting - OD(ND_FlocMod))/2; 0 m], [-90; 0; 90]*deg, ND_FlocMod, PS_FlocMod)
        Elbow2 ← ElbowF(FlocModElbowLowC_Origin + [-L_FlocModConnectorLowC; i*(W_FlocChannel - 2*S_Fitting - OD(ND_FlocMod))/2; 0 m], [90; 0; -90]*deg, ND_FlocMod, PS_FlocMod)
        local ← stack(local, Elbow1, Elbow2)
    return local
FlocTeesC :=
    local ← view("t")
    for i ∈ 0 .. 2
        for j ∈ 0 .. max(0, N_FlocSpaceExpansions - 2)
            Tee1 ← TeeF(FlocModTeeC_Origin + [0 m; i*(W_FlocChannel - 2*S_Fitting - OD(ND_FlocMod))/2; j*H_FlocObs], [90; 0; 90]*deg, ND_FlocMod, PS_FlocMod)
            Tee2 ← TeeF(FlocModTeeC_Origin + [-L_FlocModConnectorMidC; i*(W_FlocChannel - 2*S_Fitting - OD(ND_FlocMod))/2; j*H_FlocObs], [-90; 0; 90]*deg, ND_FlocMod, PS_FlocMod)
            local ← stack(local, Tee1, Tee2)
    return local
FlocElbowsHighC :=
    local ← view("t")
    for i ∈ 0 .. 2
        Elbow1 ← ElbowF(FlocModElbowHighC_Origin + [0 m; i*(W_FlocChannel - 2*S_Fitting - OD(ND_FlocMod))/2; 0 m], [-90; 0; -90]*deg, ND_FlocMod, PS_FlocMod)
        Elbow2 ← ElbowF(FlocModElbowHighC_Origin + [-L_FlocModConnectorHighC; i*(W_FlocChannel - 2*S_Fitting - OD(ND_FlocMod))/2; 0 m], [90; 0; 90]*deg, ND_FlocMod, PS_FlocMod)
        local ← stack(local, Elbow1, Elbow2)
    return local
FlocFittingCScript := stack(FlocElbowsLowC, FlocTeesC, FlocElbowsHighC)
# Floc fittings A (even-numbered channels)
FlocElbowsLowA :=
    local ← view("t")
    for i ∈ 0 .. 2
        Elbow1 ← ElbowF(FlocModElbowLowA_Origin + [0 m; i*(W_FlocChannel - 2*S_Fitting - OD(ND_FlocMod))/2; 0 m], [-90; 0; 90]*deg, ND_FlocMod, PS_FlocMod)
        Elbow2 ← ElbowF(FlocModElbowLowA_Origin + [-L_FlocModConnectorLowA; i*(W_FlocChannel - 2*S_Fitting - OD(ND_FlocMod))/2; 0 m], [90; 0; -90]*deg, ND_FlocMod, PS_FlocMod)
        local ← stack(local, Elbow1, ArrayFlocModYA, Elbow2, ArrayFlocModYA)
    return local
FlocTeesA :=
    local ← view("t")
    for i ∈ 0 .. 2
        for j ∈ 0 .. max(0, N_FlocSpaceExpansions - 2)
            Tee1 ← TeeF(FlocModTeeA_Origin + [0 m; i*(W_FlocChannel - 2*S_Fitting - OD(ND_FlocMod))/2; j*H_FlocObs], [90; 0; 90]*deg, ND_FlocMod, PS_FlocMod)
            Tee2 ← TeeF(FlocModTeeA_Origin + [-L_FlocModConnectorMidA; i*(W_FlocChannel - 2*S_Fitting - OD(ND_FlocMod))/2; j*H_FlocObs], [-90; 0; 90]*deg, ND_FlocMod, PS_FlocMod)
            local ← stack(local, Tee1, ArrayFlocModYA, Tee2, ArrayFlocModYA)
    return local
FlocElbowsHighA :=
    local ← view("t")
    for i ∈ 0 .. 2
        Elbow1 ← ElbowF(FlocModElbowHighA_Origin + [0 m; i*(W_FlocChannel - 2*S_Fitting - OD(ND_FlocMod))/2; 0 m], [-90; 0; -90]*deg, ND_FlocMod, PS_FlocMod)
        Elbow2 ← ElbowF(FlocModElbowHighA_Origin + [-L_FlocModConnectorHighA; i*(W_FlocChannel - 2*S_Fitting - OD(ND_FlocMod))/2; 0 m], [90; 0; 90]*deg, ND_FlocMod, PS_FlocMod)
        local ← stack(local, Elbow1, ArrayFlocModYA, Elbow2, ArrayFlocModYA)
    return local
FlocFittingAScript := stack(FlocElbowsLowA, FlocTeesA, FlocElbowsHighA)
FlocModFittingScript := stack(FlocModFittingLayer, FlocFittingBScript, FlocFittingCScript, FlocFittingAScript, FlocModFittingFrz)
# Channel drains
# Drain fittings
FlocDrainCoupling_Origin := Floc_Origin + [
    -L_Floc + S_Fitting + OR_Fitting(ND_FlocDrain);
    3*W_FlocChannel/4 - (S_Fitting + OR(ND_FlocMod))/2;
    -SocketDepth(ND_FlocDrain)
]
FlocDrainElbow_Origin := Floc_Origin + [
    -L_Floc + S_Fitting + OR_Fitting(ND_FlocDrain) - ElbowRadius(ND_FlocDrain);
    3*W_FlocChannel/4 - (S_Fitting + OR(ND_FlocMod))/2;
    min(-T_FlocSlab - OR_Fitting(ND_FlocDrain), -CouplingLength(ND_FlocDrain) - SocketDepth(ND_FlocDrain) - ElbowRadius(ND_FlocDrain))
]
FlocDrainElbows :=
    local ← view("t")
    for i ∈ 0 .. N_FlocChannels - 2
        Elbow ← ElbowSUBF(FlocDrainElbow_Origin + [0 m; (W_FlocChannel + T_FlocDividingWall)*i; 0 m], [-90; 0; 90]*deg, ND_FlocDrain, SDR_26, ["FlocTankCon"])
        local ← stack(local, Elbow)
    return local
FlocDrainCouplings :=
    local ← view("t")
    for i ∈ 0 .. N_FlocChannels - 2
        Coupling ← CouplingSUBF(FlocDrainCoupling_Origin + [0 m; (W_FlocChannel + T_FlocDividingWall)*i; 0 m], [0; -90]*deg, ND_FlocDrain, SDR_26, ["FlocTankCon"])
        local ← stack(local, Coupling)
    return local
FlocDrainFittingScript := stack(FlocDrainFittingLayer, FlocDrainElbows, FlocDrainCouplings, FlocDrainFittingFrz)
FlocDrainFittingScript :=
    "" if N_FlocChannels < 20
    FlocDrainFittingScript
# Drain pipes
FlocDrainHorizPipes :=
    local ← view("t")
    for i ∈ 0 .. N_FlocChannels - 2
        Pipe ← PipeF(FlocDrainElbow_Origin + [0 m; (W_FlocChannel + T_FlocDividingWall)*i; 0 m], T_FlocWall + S_Fitting + OR_Fitting(ND_FlocDrain) - ElbowRadius(ND_FlocDrain), [0; 0]*deg, ND_FlocDrain, SDR_26)
        local ← stack(local, Pipe)
    return local
FlocDrainVertPipes :=
    local ← view("t")
    for i ∈ 0 .. N_FlocChannels - 2
        Pipe ← PipeSUBF(FlocDrainCoupling_Origin + [
            0 m;
            (W_FlocChannel + T_FlocDividingWall)*i;
            -CouplingLength(ND_FlocDrain) + 2*SocketDepth(ND_FlocDrain)
        ], FlocDrainCoupling_Origin[2] - FlocDrainElbow_Origin[2] - ElbowRadius(ND_FlocDrain) - CouplingLength(ND_FlocDrain) + 2*SocketDepth(ND_FlocDrain), [0; -90]*deg, ND_FlocDrain, SDR_26, ["FlocTankCon"])
        local ← stack(local, Pipe)
    return local
FlocDrainPipeScript := stack(FlocDrainPipeLayer, FlocDrainHorizPipes, FlocDrainVertPipes, FlocDrainPipeFrz)
FlocDrainPipeScript :=
    "" if N_FlocChannels < 20
    FlocDrainPipeScript
# Drain stubs
FlocDrainStub := PipeF(FlocDrainCoupling_Origin, H_Floc + SocketDepth(ND_FlocDrain) + L_FlocDrainStubExt, [0; 90]*deg, ND_FlocDrain, SDR_26)
ArrayFlocDrainStub := ArrayLast(N_FlocChannels - 1, 1, W_FlocChannel + T_FlocDividingWall)
ArrayFlocDrainStub :=
    "" if N_FlocChannels < 20
    ArrayFlocDrainStub
FlocDrainStubScript := stack(FlocDrainRemovableLayer, FlocDrainStub, ArrayFlocDrainStub, FlocDrainRemovableFrz)
FlocDrainScript := stack(FlocDrainFittingScript, FlocDrainPipeScript, FlocDrainStubScript)
W_TrainWalkway := 1.5 m
ThawFloc := ThawMultiple(["Floc*Con"])
MirrorFlocTank := Mirror3dAll("yz", [Floc_Origin[0] - L_Floc - W_PlantDC/2 - T_FlocWall; 0 m], "n")
FreezeFloc := FreezeMultiple(["Floc*Con"])
mirrorFlocpt := [-L_Floc/2; 0 m; 0 m]
mirrorFloc :=
    if N_FlocChannels < 2
        mir ← Mirror3dAll("yz", mirrorFlocpt, "y")
        thwFloc ← ThawMultiple(["Floc*"])
        thwEt ← ThawMultiple(["Et*"])
        frzFloc ← FreezeMultiple(["Floc*"])
        frzEt ← FreezeMultiple(["Et*"])
        mir ← stack(thwFloc, thwEt, mir, frzEt, frzFloc)
    mir ← "" otherwise
    return mir
AC_FlocTank := stack(FlocMasonryScript, FlocModConnectorScript, FlocModSpacerScript, FlocBaffleScript, FlocObstacleScript, FlocModFittingScript, FlocDrainScript)
