Q_Plant := 3*L/s
# [reference: ExpertInputs.xmcd]
# [reference: MathFunctions.xmcd]
# [reference: PipeDatabase.xmcd]
# [reference: FluidsFunctions.xmcd]
# [reference: SedimentationTank.xmcd]
# [reference: Flocculator_jem384.xmcd]
# [reference: LFOM.xmcd]
# [reference: EntranceTank.xmcd]
# [reference: StackedRapidSandFilter.xmcd]
# [reference: LinearCdc.xmcd]
# [reference: ChemStorageTanks.xmcd]
# AutoCAD drawing programs:
# Translators:
# These are the codes that take MathCAD outputs and create AutoCAD scripts that are used to draw the plant (formerly Basics)
# [reference: MtoATranslators.xmcd]
# The wrapped MtoA translator contains the functions that the user will want to access. These functions will draw pieces with full functionality - specifying the location, dimension, and orientation of the object. Also, it contains layer control and subtraction capabilities for grouped objects.
# [reference: MtoATranslatorsWrapped.xmcd]
# Drawing functions:
# [reference: ChannelF.xmcd]
# [reference: PlumbingF.xmcd]
# [reference: TankF.xmcd]
# [reference: StairsF.xmcd]
# [reference: DrainChannelF.xmcd]
# Flocculator AutoCAD
# Dimensions
L_ChannelSlot := 5 cm
TotalFloc_Dim := [L_Floc; W_Floc; H_Floc] = [0.54; 2.33086; 2.07839] m
'
Wall_DimLF := [L_Floc + 2*L_ChannelSlot; T_FlocChannelWall; TotalFloc_Dim[2]] = [0.64; 0.05; 2.07839] m
Wall_Dim := [L_Floc; T_FlocChannelWall; TotalFloc_Dim[2]] = [0.54; 0.05; 2.07839] m
Slot_Dim := [L_ChannelSlot; T_FlocChannelWall; TotalFloc_Dim[2]]
FlocPort_Dim :=
    for i ∈ 0 .. (N_FlocChannels - 2)
        FlocPort_Dim[0, i] ← [W_FlocPort[N_FlocChannels - 2 - i]; T_FlocChannelWall + 2*zc; (-H_FlocPort)[i]]
    return FlocPort_Dim
# Floc ports connect the channels.
ChannelOpening_Dim := [W_SedInletChannelPreWeir; T_PlantWall; Z_FlocTank + H_Floc - Z_SedChannelBottom] = [0.28415; 0.15; 0.631828] m
# normally want a 30deg slope, unless FlocModuleBaffle is too close
# set slope to be 5 cm away from nearest Baffle
FlocDrainSlope_Dim :=
    [sqrt(3)*H_FlocSlope; -D_FlocValve; H_FlocSlope] if sqrt(3)*H_FlocSlope < W_FlocPort[0] + S_FlocPortGap - 5 cm
    [W_FlocPort[0] + S_FlocPortGap - 5 cm; -D_FlocValve; H_FlocSlope] otherwise
Port_Dim := [T_FlocBaffle + 2*zc; L_BafflePort + L_Slot; L_BafflePort]
BaffleSlot1_Dim := [T_FlocBaffle; W_FlocChannel + 2*L_Slot; H_Floc - Z_FlocBaffles[0, 0]]
BaffleSlot1Last_Dim := [T_FlocBaffle; W_FlocChannel + 2*L_Slot; H_Floc - Z_FlocBaffles[0, N_FlocChannels - 1]]
BaffleSlot2_Dim := [T_FlocBaffle; W_FlocChannel + 2*L_Slot; H_Floc - Z_FlocBaffles[1, 0]]
BaffleSlot2Last_Dim := [T_FlocBaffle; W_FlocChannel + 2*L_Slot; H_Floc - Z_FlocBaffles[1, N_FlocChannels - 1]]
# Pipe Spacer Size
OD_PipeSpacerEstF := [FloorNearest(.6*W_FlocChannel, Pipesizes[:, 1]); CeilNearest(.6*W_FlocChannel, Pipesizes[:, 1])] = [3.5; 4] in
OD_PipeSpacerEstC := CeilNearest(.6*W_FlocChannel, Pipesizes[:, 1]) = 4 in
Index :=
    for i ∈ 0 .. 1
        I[i] ← index(OD_PipeSpacerEstF[i], Pipesizes[:, 1])
        Avail ← CountryPipes[I[i], Country]
        if Avail == 0
            while Avail == 0
                I[i] ← I[i] + 1
                Avail ← CountryPipes[I[i], Country]
    return I
    = [10; 12]
ND_SpacerPipeArray := [Pipesizes[Index[0], 0]; Pipesizes[Index[1], 0]] = [3; 4] in
OD_PipeSpacer := [outerdiameter(ND_SpacerPipeArray[0]); outerdiameter(ND_SpacerPipeArray[1])] = [3.5; 4.5] in
A_Percentage := OD_PipeSpacer/W_FlocChannel = [0.534121; 0.686727]
ND_SpacerPipe :=
    ND_SpacerPipeArray[index(RoundNearest(.6, A_Percentage), A_Percentage)] if Q_Plant ≤ Q_PlantMaxLF
    0.75 in otherwise
    = 3 in
# Number and Spacing of Obstacles
S_OverLap := L_FlocBaffles[0, 0] - Z_FlocBaffles[1, 0] = 1.28765 m
S_ObstacleEff := 10*outerdiameter(ND_SpacerPipe)/2 = 0.4445 m
N_ObstaclesEst := (S_OverLap - S_ObstacleEff)/(S_ObstacleEff + outerdiameter(ND_SpacerPipe)) = 1.58071
N_Obstacles :=
    floor(N_ObstaclesEst) if N_ObstaclesEst ≥ 2
    N_Obstacles ← 2 otherwise
    = 2
S_Obstacle := (S_OverLap - outerdiameter(ND_SpacerPipe)*N_Obstacles)/(N_Obstacles + 1) = 0.36995 m
# Origin Points
Floc_Origin := [Plant_Origin[0]; Plant_Origin[1] + N_SedTanks*(W_Sed + T_PlantWall); Plant_Origin[2] + Z_FlocTank] = [0; 1.2168; 0] m
Wall_Origin := [Floc_Origin[0] - TotalFloc_Dim[0] - T_PlantWall; Floc_Origin[1] + W_FlocChannel; Floc_Origin[2]] = [-0.69; 1.38324; 0] m
Slot_Origin := Wall_Origin + [T_PlantWall - L_ChannelSlot; 0 m; 0 m]
L_FlocCouplingExt = 0.05 m
FlocCoupling_Origin :=
    if Q_Plant > Q_PlantMaxLF
        [
            Floc_Origin[0] + ConRadius(ND_RMPipe) + S_Fitting - L_Floc;
            Floc_Origin[1] + N_FlocChannels*W_FlocChannel + T_FlocChannelWall*(N_FlocChannels - 1) + SocketDepth(ND_RMPipe) - L_FlocCouplingExt;
            Floc_Origin[2] + outerradius(ND_RMPipe) + S_Fitting
        ]
    otherwise
        [
            Floc_Origin[0] + ConRadius(ND_RMPipe) + S_Fitting - L_Floc;
            (Floc_Origin[1] + N_FlocChannels*W_FlocChannel + T_FlocChannelWall*(N_FlocChannels - 1) + T_PlantWall) - (CouplingLength(ND_RMPipe) - SocketDepth(ND_RMPipe));
            Floc_Origin[2] + outerradius(ND_RMPipe) + S_Fitting
        ]
Floc_Origin[1] + N_FlocChannels*W_FlocChannel + T_FlocChannelWall*(N_FlocChannels - 1) + T_PlantWall = 3.69766 m
FlocPort_Origin :=
    for i ∈ 0 .. (N_FlocChannels - 2)
        if mod(i, 2) == 1
            FlocPort_Origin[0, i] ← [
                Floc_Origin[0] - TotalFloc_Dim[0];
                Floc_Origin[1] + (W_FlocChannel*(1 + i)) + T_FlocChannelWall*i - zc;
                Floc_Origin[2] + H_FlocPort[i]
            ]
        otherwise
            FlocPort_Origin[0, i] ← [
                Floc_Origin[0] - W_FlocPort[N_FlocChannels - 2 - i];
                Floc_Origin[1] + (W_FlocChannel*(1 + i)) + T_FlocChannelWall*i - zc;
                Floc_Origin[2] + H_FlocPort[i]
            ]
    return FlocPort_Origin
# The flocport origins were set to start at the top height of the ports themselves (added to the origin otherwise it disappears).  This changes the flocports to be at the bottom of the channel dividing walls instead of at the top (more structurally sound).
# The Channel Opening was changed in the z-direction so that the bottom opening aligned with the bottom of the tank (for the same reason as the flocports).
ChannelOpening_Origin := [Floc_Origin[0] - L_Sed; Floc_Origin[1] - T_PlantWall; Z_SedChannelBottom] = [-3.86842; 1.0668; 1.44656] m
X_FlocBaffles[0, 0] = 0.135 m
# "L" origins are for the last channel only
LargeCap_Origin := [
    -CapThickness(1.5 in) + Floc_Origin[0] - L_Floc + X_FlocBaffles[0, 0];
    (Floc_Origin[1] + W_FlocChannel*N_FlocChannels + T_FlocChannelWall*(N_FlocChannels - 1) - 2*S_Fitting);
    {
        (Floc_Origin[2] + L_FlocBaffleLower - 0.5*(L_FlocBaffleLower + L_FlocBaffleUpper - (H_Floc - 0.5*H_PlantFreeboard))) if EN_ModuleIdentical == 0
        (Floc_Origin[2] + 4*S_ModulePipesV + S_FlocBaffle[last(S_FlocBaffle)]*Pi_FlocBaffle - .05 m) otherwise
    }
] = [-0.409445; 3.44766; 0.832877] m
# Shifted LargeCap.Origin and LargeCapL.Origin (y and z values) to within 0.05m of each wall
SpacerCap_Origin := [
    -CapThickness(ND_SpacerPipe) + Floc_Origin[0];
    Floc_Origin[1] + (W_FlocChannel*N_FlocChannels + T_FlocChannelWall*(N_FlocChannels - 1)) - W_FlocChannel/2;
    Floc_Origin[2] + L_FlocBaffleLower - S_Obstacle - ((innerdiameter(ND_SpacerPipe, PS_Modules) - CapDiameter(ND_FlocModulesMain))/2)
] = [-0.00635; 3.46444; 1.0952] m
FittedCapLF_Origin := [
    -CapThickness(ND_SpacerPipe) + Floc_Origin[0] - CapThickness(0.5 in);
    Floc_Origin[1] + (W_FlocChannel*N_FlocChannels + T_FlocChannelWall*(N_FlocChannels - 1)) - W_FlocChannel/2;
    Floc_Origin[2] + L_FlocBaffleLower - S_Obstacle
] = [-0.00957263; 3.46444; 1.1202] m
SpacerCapLast_Origin := SpacerCap_Origin + [0 m; -(W_FlocChannel*(N_FlocChannels - 1) + T_FlocChannelWall*(N_FlocChannels - 1)); 0 m] = [-0.00635; 1.30002; 1.0952] m
LargeCapL_Origin := [
    -CapDiameter(1.5 in)/2 + outerradius(1.5 in) + Floc_Origin[0] - L_Floc + X_FlocBaffles[0, N_FlocChannels - 1] + B_FlocBaffle[0];
    Floc_Origin[1] + W_FlocChannel - 2*S_Fitting;
    Floc_Origin[2] + 4*S_ModulePipesV + S_FlocBaffle[last(S_FlocBaffle)]*Pi_FlocBaffle - .05 m
] = [-0.278445; 1.28324; 1.44015] m  # Matched L.Origin's to the rest of the Origins to account for now-equivalent FlocModuleBaffle spacings.
FittedCap_Origin := LargeCap_Origin + [T_FlocBaffle + CapThickness(0.5 in) + CapThickness(1.5 in); 0 m; 0 m] = [-0.399777; 3.44766; 0.832877] m
FittedCapL_Origin := LargeCapL_Origin + [
    T_FlocBaffle + CapDiameter(0.5 in)/2 - outerradius(0.5 in) + CapDiameter(1.5 in)/2 - outerradius(1.5 in);
    0 m;
    0 m
]
LongPipe_Origin := FittedCap_Origin + [L_FlocModuleLong[0]; 0 m; 0 m]
LongPipeL_Origin := FittedCapL_Origin + [L_FlocModuleLong[0]; 0 m; 0 m]
ModuleCoupling_Origin := LongPipe_Origin + [CouplingLength(0.5 in) - 2*SocketDepth(0.5 in); 0 m; 0 m]
ModuleCouplingL_Origin := LongPipeL_Origin + [CouplingLength(0.5 in) - 2*SocketDepth(0.5 in); 0 m; 0 m]
ConnectorPipe_Origin := ModuleCoupling_Origin + [L_FlocModuleConnector[0]; 0 m; 0 m]
ConnectorPipeL_Origin := ModuleCouplingL_Origin + [L_FlocModuleConnector[0]; 0 m; 0 m]
FlocAdapter1_Origin := [
    -L_Floc - CouplingLength(ND_FlocValve) - (max(T_FlocChannelWall - CouplingLength(ND_FlocValve), 0 m) + SocketDepth(ND_FlocValve));
    Y_FlocDrainValves[0];
    Floc_Origin[2]
]
FlocValve_Origin := FlocAdapter1_Origin + [-MaleAdapterLength(ND_FlocValve) + SocketDepth(ND_FlocValve) + ValveSocket(ND_FlocValve); 0 m; 0 m]
FlocAdapter2_Origin := FlocValve_Origin + [
    -ValveLength(ND_FlocValve) + ValveSocket(ND_FlocValve) - MaleAdapterLength(ND_FlocValve) + SocketDepth(ND_FlocValve);
    0 m;
    0 m
]
FlocDrainNipple_Origin := FlocAdapter2_Origin
BaffleSlot1_Origin := [Floc_Origin[0] - L_Sed; -L_Slot; Floc_Origin[2]] + [X_FlocBaffles[0, 0]; Y_FlocBaffles[0, 0]; Z_FlocBaffles[0, 0]]
BaffleSlot1Last_Origin := [Floc_Origin[0] - L_Sed; -L_Slot; Floc_Origin[2]] + [
    X_FlocBaffles[0, N_FlocChannels - 1];
    Y_FlocBaffles[0, N_FlocChannels - 1];
    Z_FlocBaffles[0, N_FlocChannels - 1]
]
BaffleSlot2_Origin := [Floc_Origin[0] - L_Sed; -L_Slot; Floc_Origin[2]] + [X_FlocBaffles[1, 0]; Y_FlocBaffles[0, 0]; Z_FlocBaffles[1, 0]]
BaffleSlot2Last_Origin := [Floc_Origin[0] - L_Sed; -L_Slot; Floc_Origin[2]] + [
    X_FlocBaffles[1, N_FlocChannels - 1];
    Y_FlocBaffles[0, N_FlocChannels - 1];
    Z_FlocBaffles[1, N_FlocChannels - 1]
]
BafflePort1V_Origin := [Floc_Origin[0] - L_Sed - zc; W_FlocChannel - L_BafflePort; Floc_Origin[2]] + [X_FlocBaffles[0, 0]; Y_FlocBaffles[0, 0]; Z_FlocBaffles[0, 0]]
BafflePort1VLast_Origin := [Floc_Origin[0] - zc - L_Sed; W_FlocChannel - L_BafflePort; Floc_Origin[2]] + [
    X_FlocBaffles[N_FlocChannelBaffles[N_FlocChannels - 1] - 1, N_FlocChannels - 1];
    Y_FlocBaffles[0, N_FlocChannels - 1];
    Z_FlocBaffles[1, N_FlocChannels - 1]
]
BafflePort2V_Origin := [Floc_Origin[0] - L_Sed - zc; -L_Slot; Floc_Origin[2]] + [X_FlocBaffles[2, 0]; Y_FlocBaffles[0, 0]; Z_FlocBaffles[2, 0]]
BafflePort2VLast_Origin := [Floc_Origin[0] - zc - L_Sed; -L_Slot; Floc_Origin[2]] + [
    X_FlocBaffles[N_FlocChannelBaffles[N_FlocChannels - 1] - 3, N_FlocChannels - 1];
    Y_FlocBaffles[0, N_FlocChannels - 1];
    Z_FlocBaffles[2, N_FlocChannels - 1]
]
# Flocculator Concrete
FlocTankLayer := layer_new("FlocTankCon", grey)
DrawFlocTank := Tank(Floc_Origin, TotalFloc_Dim, T_PlantWall)
FreezeFlocTank := FreezeLayer("FlocTankCon")
SelectFlocTank := SelectLayer("FlocTankCon")
FlocChannelWallLayer := layer_new("FlocChWallCon", dkgrey)
FreezeChannelWall := FreezeLayer("FlocChWallCon")
DrawFlocWallLF := BoxF(Slot_Origin, Slot_Origin + Wall_DimLF, [0; 0; 0]*deg)
DrawFlocWall := BoxF(Wall_Origin, Wall_Origin + Wall_Dim, [0; 0; 0]*deg)
ArrayFlocWall := ArrayLast(N_FlocChannels - 1, 1, W_FlocChannel + T_FlocChannelWall)
FlocChannelPorts :=
    Local ← FreezeLayer("FlocTankCon")
    for i ∈ 0 .. (N_FlocChannels - 2)
        Local ← stack(Local, BoxF(FlocPort_Origin[0, i], FlocPort_Origin[0, i] + FlocPort_Dim[0, i], [0; 0; 0]*deg))
DrawChannelSlot := BoxF(Slot_Origin, Slot_Origin + Slot_Dim, [0; 0; 0]*deg)
MirrorChannelSlot := Mirror3dAll("yz", [-L_Floc/2; FittedCapLF_Origin[2]], "n")
ArrayChannelSlot := ArrayLast(N_FlocChannels - 1, 1, W_FlocChannel + T_FlocChannelWall)
ChannelOpening := BoxF(ChannelOpening_Origin, ChannelOpening_Origin + ChannelOpening_Dim, [0; 0; 0]*deg)
DrawBaffleSlot1 := BoxF(BaffleSlot1_Origin, BaffleSlot1_Origin + BaffleSlot1_Dim, [0; 0; 0]*deg)
DrawBaffleSlot1Last := BoxF(BaffleSlot1Last_Origin, BaffleSlot1Last_Origin + BaffleSlot1Last_Dim, [0; 0; 0]*deg)
DrawBaffleSlot2 := BoxF(BaffleSlot2_Origin, BaffleSlot2_Origin + BaffleSlot2_Dim, [0; 0; 0]*deg)
DrawBaffleSlot2Last := BoxF(BaffleSlot2Last_Origin, BaffleSlot2Last_Origin + BaffleSlot2Last_Dim, [0; 0; 0]*deg)
ArrayBaffleSlot1 := ArrayMultiple([BaffleSlot1_Origin], N_FlocChannels - 1, ceil(N_FlocChannelBaffles[0]/2), -W_FlocChannel - T_FlocChannelWall, 2*B_FlocBaffle[0])
ArrayBaffleSlot2 := ArrayMultiple([BaffleSlot2_Origin], N_FlocChannels - 1, floor(N_FlocChannelBaffles[0]/2), -W_FlocChannel - T_FlocChannelWall, 2*B_FlocBaffle[0])
ArrayBaffleSlot1Last := ArrayMultiple([BaffleSlot1Last_Origin], 1, ceil(N_FlocChannelBaffles[N_FlocChannels - 1]/2), -W_FlocChannel - T_FlocChannelWall, 2*B_FlocBaffle[N_FlocChannels - 1])
ArrayBaffleSlot2Last := ArrayMultiple([BaffleSlot2Last_Origin], 1, floor(N_FlocChannelBaffles[N_FlocChannels - 1]/2), -W_FlocChannel - T_FlocChannelWall, 2*B_FlocBaffle[N_FlocChannels - 1])
Wedge1 := WedgeF([
    Plant_Origin[0] - L_Floc;
    Y_FlocDrainValves[0] + 0.5*D_FlocValve + FlocDrainSlope_Dim[1];
    Floc_Origin[2] - 0.5*D_FlocValve + FlocDrainSlope_Dim[2]
], [
    Plant_Origin[0] - L_Floc + FlocDrainSlope_Dim[0];
    Y_FlocDrainValves[0] + 0.5*D_FlocValve;
    Floc_Origin[2] - 0.5*D_FlocValve
], [0; 0; 0]*deg)
ArrayWedge := ArrayLast(last(Y_FlocDrainValves) + 1, 1, 2*W_FlocChannel + 2*T_FlocChannelWall)
GroupFlocSubtractionPieces := GroupAll("DeleteMe")
SubtractFlocTankPieces := SubtractF(["FlocTankCon"], "DeleteMe")
FlocTankScript :=
    stack(FlocTankLayer, DrawFlocTank, DrawFlocWall, ArrayFlocWall, FlocChannelPorts, ChannelOpening, Wedge1, ArrayWedge, GroupFlocSubtractionPieces, SubtractFlocTankPieces) if L_Slot == 0 and Q_Plant > Q_PlantMaxLF
    stack(FlocTankLayer, DrawFlocTank, FlocChannelPorts, ChannelOpening, DrawChannelSlot, ArrayChannelSlot, MirrorChannelSlot, Wedge1, ArrayWedge, GroupFlocSubtractionPieces, SubtractFlocTankPieces, FlocChannelWallLayer, DrawFlocWallLF, ArrayFlocWall, FreezeChannelWall) if Q_Plant ≤ Q_PlantMaxLF
    stack(FlocTankLayer, DrawFlocTank, DrawFlocWall, ArrayFlocWall, FlocChannelPorts, ChannelOpening, DrawBaffleSlot1, DrawBaffleSlot2, DrawBaffleSlot1Last, DrawBaffleSlot2Last, ArrayBaffleSlot1, ArrayBaffleSlot2, ArrayBaffleSlot1Last, ArrayBaffleSlot2Last, sp, Wedge1, ArrayWedge, GroupFlocSubtractionPieces, SubtractFlocTankPieces) otherwise
FlocBaffleLayerV := layer_new("FlocModBaffles", ltpurple)
DrawLowerBaffleV := BoxF([Floc_Origin[0] - L_Floc; L_Slot; Floc_Origin[2]] + [X_FlocBaffles[0, 0]; Y_FlocBaffles[0, 0]; Z_FlocBaffles[0, 0]], [Floc_Origin[0] - L_Floc; L_Slot; Floc_Origin[2]] + [X_FlocBaffles[0, 0]; Y_FlocBaffles[0, 0]; Z_FlocBaffles[0, 0]] + [T_FlocBaffle; W_FlocChannel + 2*L_Slot; L_FlocBaffles[0, 0]], [0; 0; 0]*deg)
ArrayLowerBaffleV := ArrayLast(1, ceil(N_FlocChannelBaffles[0]/2), 2*B_FlocBaffle[0])
# Aligned FlocModuleBaffle spacing of last floc channel to the FlocModuleBaffle spacings of the other channels.
DrawUpperBaffleV := BoxF([Floc_Origin[0] - L_Floc; L_Slot; Floc_Origin[2]] + [X_FlocBaffles[1, 0]; Y_FlocBaffles[0, 0]; Z_FlocBaffles[1, 0]], [Floc_Origin[0] - L_Floc; L_Slot; Floc_Origin[2]] + [X_FlocBaffles[1, 0]; Y_FlocBaffles[0, 0]; Z_FlocBaffles[1, 0]] + [T_FlocBaffle; W_FlocChannel + 2*L_Slot; L_FlocBaffles[1, 0]], [0; 0; 0]*deg)
ArrayUpperBaffleV := ArrayLast(1, floor(N_FlocChannelBaffles[0]/2), 2*B_FlocBaffle[0])
ArrayBafflesChannelV := array_all(N_FlocChannels - 1, 1, -W_FlocChannel - T_FlocChannelWall)
DrawLastLowerBaffleV := BoxF([Floc_Origin[0] - L_Floc; -L_Slot; Floc_Origin[2]] + [
    X_FlocBaffles[N_FlocChannelBaffles[N_FlocChannels - 1] - 1, N_FlocChannels - 1];
    Y_FlocBaffles[0, N_FlocChannels - 1];
    Z_FlocBaffles[1, N_FlocChannels - 1]
], [Floc_Origin[0] - L_Floc; -L_Slot; Floc_Origin[2]] + [
    X_FlocBaffles[N_FlocChannelBaffles[N_FlocChannels - 1] - 1, N_FlocChannels - 1];
    Y_FlocBaffles[0, N_FlocChannels - 1];
    Z_FlocBaffles[1, N_FlocChannels - 1]
] + [-T_FlocBaffle; W_FlocChannel + 2*L_Slot; L_FlocBaffles[1, N_FlocChannels - 1]], [0; 0; 0]*deg)
N_FlocChannelBaffles[last(N_FlocChannelBaffles)] = 3
ArrayLastLowerBaffleV := ArrayLast(1, floor(N_FlocChannelBaffles[last(N_FlocChannelBaffles)]/2), -(2*B_FlocBaffle[0]))
DrawLastUpperBaffleV := BoxF([Floc_Origin[0] - L_Floc; -L_Slot; Floc_Origin[2]] + [
    X_FlocBaffles[N_FlocChannelBaffles[N_FlocChannels - 1] - 2, N_FlocChannels - 1];
    Y_FlocBaffles[0, N_FlocChannels - 1];
    Z_FlocBaffles[0, N_FlocChannels - 1]
], [Floc_Origin[0] - L_Floc; -L_Slot; Floc_Origin[2]] + [
    X_FlocBaffles[N_FlocChannelBaffles[N_FlocChannels - 1] - 2, N_FlocChannels - 1];
    Y_FlocBaffles[0, N_FlocChannels - 1];
    Z_FlocBaffles[0, N_FlocChannels - 1]
] + [-T_FlocBaffle; W_FlocChannel + 2*L_Slot; L_FlocBaffles[0, N_FlocChannels - 1]], [0; 0; 0]*deg)
ArrayLastUpperBaffleV := ArrayLast(1, floor(N_FlocChannelBaffles[last(N_FlocChannelBaffles)]/2), -(2*B_FlocBaffle[0]))
W_FlocChannel = 0.166442 m
FreezeBafflesV := FreezeLayer("FlocModBaffles")
DrawBafflePort1V := BoxF(BafflePort1V_Origin, BafflePort1V_Origin + Port_Dim, [0; 0; 0]*deg)
DrawBafflePort1VLast := BoxF(BafflePort1VLast_Origin, BafflePort1VLast_Origin + Port_Dim, [0; 0; 0]*deg)
DrawBafflePort2V := BoxF(BafflePort2V_Origin, BafflePort2V_Origin + Port_Dim, [0; 0; 0]*deg)
DrawBafflePort2VLast := BoxF(BafflePort2VLast_Origin, BafflePort2VLast_Origin + Port_Dim, [0; 0; 0]*deg)
ArrayPort1V := ArrayMultiple([BafflePort1V_Origin], N_FlocChannels - 1, ceil(N_FlocChannelBaffles[0]/4), -W_FlocChannel - T_FlocChannelWall, 4*B_FlocBaffle[0])
ArrayPort2V := ArrayMultiple([BafflePort2V_Origin], N_FlocChannels - 1, ceil((N_FlocChannelBaffles[0] - 2)/4), -W_FlocChannel - T_FlocChannelWall, 4*B_FlocBaffle[0])
ArrayPort1VLast := ArrayMultiple([BafflePort1VLast_Origin], 1, ceil(N_FlocChannelBaffles[N_FlocChannels - 1]/4), -W_FlocChannel - T_FlocChannelWall, -(4*B_FlocBaffle[N_FlocChannels - 1]))
ArrayPort2VLast := ArrayMultiple([BafflePort2VLast_Origin], 1, ceil((N_FlocChannelBaffles[N_FlocChannels - 1] - 3)/4), -W_FlocChannel - T_FlocChannelWall, -(4*B_FlocBaffle[N_FlocChannels - 1]))
FlocCouplingBaffleCut := CylinderF(FlocCoupling_Origin, ConRadius(ND_RMPipe), SocketDepth(ND_RMPipe), [90; 0]*deg)
GroupBafflesV := GroupAll("DeleteMe")
SubtractBafflePortsV := SubtractF(["FlocModBaffles"], "DeleteMe")
MirrorBafflesV := MirrorAll([Floc_Origin[0]; Floc_Origin[1]] - [W_Floc/2; 0 m], [Floc_Origin[0]; Floc_Origin[1]] - [W_Floc/2; zc], "y")
FlocTankBaffleScriptV := stack(FlocBaffleLayerV, DrawLowerBaffleV, ArrayLowerBaffleV, DrawUpperBaffleV, ArrayUpperBaffleV, ArrayBafflesChannelV, DrawLastLowerBaffleV, ArrayLastLowerBaffleV, DrawLastUpperBaffleV, ArrayLastUpperBaffleV, FreezeBafflesV, DrawBafflePort1V, DrawBafflePort2V, DrawBafflePort1VLast, DrawBafflePort2VLast, ArrayPort1V, ArrayPort2V, ArrayPort1VLast, ArrayPort2VLast, FlocCouplingBaffleCut, GroupBafflesV, SubtractBafflePortsV)
# Vertical Baffles
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# Modules labeled "1" are for the odd-numbered channels (1st, 3rd, etc) while "Mod2" are those facing the opposite direction in the even-numbered channels.
FlocMod1CapLayer := layer_new("FlocModCapPlu", red)
FlocModLargeCap := CapF(LargeCap_Origin, [0; 0]*deg, ND_FlocModulesLarge)
FlocModFittedCap := CapF(FittedCap_Origin, [180; 0]*deg, ND_FlocModulesMain)
FlocMod1CapFrz := FreezeLayer("FlocModCapPlu")
FlocMod1CouplingLayer := layer_new("FlocModCouplingPlu", green)
FlocModCoupling := CouplingF(ModuleCoupling_Origin, [0; 0]*deg, ND_FlocModulesMain, PS_Modules)
FlocMod1CouplingFrz := FreezeLayer("FlocModCouplingPlu")  # must freeze this layer to ensure it gets grouped
FlocMod1PipeLayer := layer_new("FlocModPipePlu", blue)
FlocModLongPipe := PipeF(LongPipe_Origin, L_FlocModuleLong[0], [0; 0]*deg, ND_FlocModulesMain, PS_Modules)
FlocModConnectorPipe := PipeF(ConnectorPipe_Origin, L_FlocModuleConnector[0], [0; 0]*deg, ND_FlocModulesMain, PS_Modules)
FlocMod1PipeFrz := FreezeLayer("FlocModPipePlu")
FlocMod1SpacerLayer := layer_new("FlocModSpacerPlu", blue)
FlocModSpacerPipe1 := PipeF(FittedCap_Origin + [S_FlocBaffle[0] - CapThickness(ND_FlocModulesMain) - T_FlocBaffle; 0; 0], S_FlocBaffle[0] - CapHeight(ND_FlocModulesMain), [0; 0]*deg, ND_SpacerPipe, PS_Modules)
FlocModSpacerPipe2 := PipeF(FittedCap_Origin + [2*S_FlocBaffle[0] - CapThickness(ND_FlocModulesMain) + T_FlocBaffle; 0; 0], S_FlocBaffle[0], [0; 0]*deg, ND_SpacerPipe, PS_Modules)
ArrayFlocModSpacer := ArrayLast(1, N_FlocChannelBafflesLong[0] - 2, B_FlocBaffle[0])
FlocMod1SpacerFrz := FreezeLayer("FlocModSpacerPlu")
FlocMod1Spacer :=
    stack(FlocMod1SpacerLayer, FlocModSpacerPipe1, FlocMod1SpacerFrz) if N_FlocChannelBafflesLong[0] == 2
    stack(FlocMod1SpacerLayer, FlocModSpacerPipe1, FlocModSpacerPipe2, ArrayFlocModSpacer, FlocMod1SpacerFrz) otherwise
ThawFlocMod1Components := ThawMultiple(["FlocMod*Plu"])
ArrayFlocModX := array_all(1, N_FlocChannelModulesLong[0], B_FlocBaffle[0]*N_FlocChannelBafflesLong[0])
FrzFlocModComponents := FreezeMultiple(["FlocMod*"])
SelectFlocMod1Spacer := SelectLayer("FlocModSpacerPlu")
FlocModSpacerPipe1Short := PipeF([
    Plant_Origin[0] - X_FlocBaffles[(N_FlocChannelBafflesShort[0] - 2)*(N_FlocChannelBafflesShort[0] > 2), 0] - T_FlocBaffle;
    FittedCap_Origin[1];
    FittedCap_Origin[2]
], S_FlocBaffle[0] - CapHeight(ND_FlocModulesMain), [0; 0]*deg, ND_SpacerPipe, PS_Modules)
FlocModSpacerPipe2Short := PipeF([
    Plant_Origin[0] - X_FlocBaffles[(N_FlocChannelBafflesShort[0] - 3)*(N_FlocChannelBafflesShort[0] > 2), 0] - T_FlocBaffle;
    FittedCap_Origin[1];
    FittedCap_Origin[2]
], S_FlocBaffle[0], [0; 0]*deg, ND_SpacerPipe, PS_Modules)
ArrayFlocModSpacerShort := ArrayLast(1, N_FlocChannelBafflesShort[0] - 2, B_FlocBaffle[0])
FlocShortBaffleSpacers1 :=
    stack(SelectFlocMod1Spacer, FlocModSpacerPipe1Short, FlocModSpacerPipe2Short) if N_FlocChannelBafflesShort[0] == 3
    stack(SelectFlocMod1Spacer, FlocModSpacerPipe1Short, FlocModSpacerPipe2Short, ArrayFlocModSpacerShort) otherwise
# FlocModSpacerFrz
SelectFlocMod1Piping := SelectLayer("FlocModPipePlu")
FlocModShortPipe := PipeF([
    Floc_Origin[0] - X_FlocBaffles[0, 0] + SocketDepth(ND_FlocModulesMain);
    LargeCap_Origin[1];
    LargeCap_Origin[2]
], L_FlocModuleShort[0], [0; 0]*deg, ND_FlocModulesMain, PS_Modules)
FlocModEndPipe := PipeF([Floc_Origin[0]; LargeCap_Origin[1]; LargeCap_Origin[2]], {
    L_FlocModuleShort[0] if N_FlocChannelBafflesShort[0] < 2
    (X_FlocBaffles[0, 0] - CouplingLength(ND_FlocModulesMain) + SocketDepth(ND_FlocModulesMain)) otherwise
}, [0; 0]*deg, ND_FlocModulesMain, PS_Modules)
FlocModRightPipe :=
    FlocModEndPipe if N_FlocChannelBafflesShort[0] < 2
    stack(FlocModShortPipe, FlocModEndPipe) otherwise
# FlocModPipeFrz
SelectFlocMod1PipeCap := SelectLayer("FlocModCapPlu")
FlocModLastLargeCap := CapF([
    {
        (Floc_Origin[0] - X_FlocBaffles[N_FlocChannelBafflesShort[0] - 1, 0] - T_FlocBaffle - (CapDiameter(ND_FlocModulesLarge)/2 - outerradius(ND_FlocModulesLarge))) if N_FlocChannelBafflesShort[0] ≥ 1
        (Floc_Origin[0] - X_FlocBaffles[0, 0] - T_FlocBaffle - (CapDiameter(ND_FlocModulesLarge)/2 - outerradius(ND_FlocModulesLarge))) otherwise
    };
    LargeCap_Origin[1];
    LargeCap_Origin[2]
], [0; 0]*deg, ND_FlocModulesLarge)
FlocModLastFittedCap := CapF([
    {
        (Floc_Origin[0] - X_FlocBaffles[N_FlocChannelBafflesShort[0] - 1, 0] + (CapDiameter(ND_FlocModulesMain)/2 - outerradius(ND_FlocModulesMain))) if N_FlocChannelBafflesShort[0] ≥ 1
        (Floc_Origin[0] - X_FlocBaffles[0, 0] + (CapDiameter(ND_FlocModulesMain)/2 - outerradius(ND_FlocModulesMain))) otherwise
    };
    LargeCap_Origin[1];
    LargeCap_Origin[2]
], [180; 0]*deg, ND_FlocModulesMain)
# FlocModCapFrz
# only if the short baffle doesn't have one baffle!!!
SelectFlocMod1Coupling := SelectLayer("FlocModCouplingPlu")
LastFlocModCoupling := CouplingF([
    Floc_Origin[0] - X_FlocBaffles[N_FlocChannelBaffles[0] - 1, 0] + CouplingLength(ND_FlocModulesMain) - SocketDepth(ND_FlocModulesMain);
    ModuleCoupling_Origin[1];
    ModuleCoupling_Origin[2]
], [0; 0]*deg, ND_FlocModulesMain, PS_Modules)
# FlocModCouplingFrz
# ThawFlocModComponents
ArrayTankModules := array_all(N_FlocChannels - 1, 1, -(W_FlocChannel + T_PlantWall))
MirrorTankModules :=
    Local ← ZoomWindow([-L_Sed - zc; (W_FlocChannel + T_PlantWall)*N_FlocChannels; 0] + Floc_Origin, Floc_Origin + [zc; zc; zc])
    for i ∈ 0 .. max(0, floor((N_FlocChannels - 1)/2) - 1)
        ModuleWindows[i, 0] ← [
            -L_Sed - zc;
            -i*(2*W_FlocChannel + T_PlantWall) + (N_FlocChannels - 1)*(W_FlocChannel + T_PlantWall) - T_PlantWall - W_FlocChannel/2;
            0
        ] + Floc_Origin
        ModuleWindows[i, 1] ← [
            zc;
            -i*(2*W_FlocChannel + T_PlantWall) + (N_FlocChannels - 1)*(W_FlocChannel + T_PlantWall) - T_PlantWall;
            0
        ] + Floc_Origin
    SelectMods ← SelectWindow(ModuleWindows)
    MirrorMods ← MirrorSelection([Floc_Origin[0] - L_Sed/2; Floc_Origin[1]], [Floc_Origin[0] - L_Sed/2; Floc_Origin[1] + zc], "y")
    Local ← stack(Local, SelectMods, MirrorMods)
    Local
FlocMod1Overlap :=
    stack(FlocMod1CapLayer, FlocModLargeCap, FlocModFittedCap, FlocMod1CapFrz, FlocMod1CouplingLayer, FlocModCoupling, FlocMod1CouplingFrz, FlocMod1PipeLayer, FlocModLongPipe, FlocModConnectorPipe, FlocMod1PipeFrz, FlocMod1Spacer, ThawFlocMod1Components, ArrayFlocModX, FrzFlocModComponents, SelectFlocMod1Piping, FlocModRightPipe, FlocMod1PipeFrz, SelectFlocMod1PipeCap, FlocModLastLargeCap, FlocModLastFittedCap, FlocMod1CapFrz, ThawFlocMod1Components, FrzFlocModComponents) if N_FlocChannelBafflesShort[0] < 2 and N_FlocChannels == 2
    stack(FlocMod1CapLayer, FlocModLargeCap, FlocModFittedCap, FlocMod1CapFrz, FlocMod1CouplingLayer, FlocModCoupling, FlocMod1CouplingFrz, FlocMod1PipeLayer, FlocModLongPipe, FlocModConnectorPipe, FlocMod1PipeFrz, FlocMod1Spacer, ThawFlocMod1Components, ArrayFlocModX, FrzFlocModComponents, FlocShortBaffleSpacers1, FlocMod1SpacerFrz, SelectFlocMod1Piping, FlocModRightPipe, FlocMod1PipeFrz, SelectFlocMod1PipeCap, FlocModLastLargeCap, FlocModLastFittedCap, FlocMod1CapFrz, SelectFlocMod1Coupling, LastFlocModCoupling, FlocMod1CouplingFrz, ThawFlocMod1Components, ArrayTankModules, MirrorTankModules, FrzFlocModComponents) if N_FlocChannels == 2 and N_FlocChannelBafflesShort[0] ≥ 2
    stack(FlocMod1CapLayer, FlocModLargeCap, FlocModFittedCap, FlocMod1CapFrz, FlocMod1CouplingLayer, FlocModCoupling, FlocMod1CouplingFrz, FlocMod1PipeLayer, FlocModLongPipe, FlocModConnectorPipe, FlocMod1PipeFrz, FlocMod1Spacer, ThawFlocMod1Components, ArrayFlocModX, FrzFlocModComponents, SelectFlocMod1Piping, FlocModRightPipe, FlocMod1PipeFrz, SelectFlocMod1PipeCap, FlocModLastLargeCap, FlocModLastFittedCap, FlocMod1CapFrz, ThawFlocMod1Components, ArrayTankModules, MirrorTankModules, FrzFlocModComponents) if N_FlocChannelBafflesShort[0] < 2
    stack(FlocMod1CapLayer, FlocModLargeCap, FlocModFittedCap, FlocMod1CapFrz, FlocMod1CouplingLayer, FlocModCoupling, FlocMod1CouplingFrz, FlocMod1PipeLayer, FlocModLongPipe, FlocModConnectorPipe, FlocMod1PipeFrz, FlocMod1Spacer, ThawFlocMod1Components, ArrayFlocModX, FrzFlocModComponents, FlocShortBaffleSpacers1, FlocMod1SpacerFrz, SelectFlocMod1Piping, FlocModRightPipe, FlocMod1PipeFrz, SelectFlocMod1PipeCap, FlocModLastLargeCap, FlocModLastFittedCap, FlocMod1CapFrz, SelectFlocMod1Coupling, LastFlocModCoupling, FlocMod1CouplingFrz, ThawFlocMod1Components, ArrayTankModules, MirrorTankModules, FrzFlocModComponents) otherwise
# Module Piping for Beginning Channels (overlapping)
# Module Piping for Last Channel (overlapping)
LargeCapLast_Origin := [
    Floc_Origin[0] + X_FlocBaffles[N_FlocChannelBaffles[last(N_FlocChannelBaffles)] - 1, cols(X_FlocBaffles) - 1] + CapThickness(ND_FlocModulesLarge) - L_Sed + T_FlocBaffle;
    Floc_Origin[1] - .05 m + W_FlocChannel;
    Floc_Origin[2] + 4*S_ModulePipesV + S_FlocBaffle[last(S_FlocBaffle)]*Pi_FlocBaffle - .05 m
]
FittedCapLast_Origin := [-T_FlocBaffle - CapThickness(ND_FlocModulesLarge) - CapThickness(ND_FlocModulesMain); 0 m; 0 m] + LargeCapLast_Origin
FlocModCouplingLast_Origin := FittedCapLast_Origin + [-L_FlocModuleLong[last(L_FlocModuleLong)]; 0 m; 0 m]
ConnectorPipeLast_Origin := FlocModCouplingLast_Origin + [-CouplingLength(ND_FlocModulesMain) + 2*SocketDepth(ND_FlocModulesMain); 0 m; 0 m]
# FrzFlocModComponents
# SelectFlocModPipeCap
FlocModLargeCapLast := CapF(LargeCapLast_Origin, [180; 0]*deg, ND_FlocModulesLarge)
ArrayFlocModXCap := ArrayLast(1, N_FlocChannelModulesLong[last(N_FlocChannelModulesLong)] + 1*(N_FlocChannelBafflesShort[last(N_FlocChannelBafflesShort)] > 0), -(B_FlocBaffle[last(B_FlocBaffle)]*N_FlocChannelBafflesLong[last(N_FlocChannelBafflesLong)]))
FlocModFittedCapLast := CapF(FittedCapLast_Origin, [0; 0]*deg, ND_FlocModulesMain)
# ArrayFlocModXCap
# FlocModCapFrz
FlocMod1CouplingSelect := SelectLayer("FlocModCouplingPlu")
FlocModCouplingLast := CouplingF(FlocModCouplingLast_Origin, [0; 0]*deg, ND_FlocModulesMain, PS_Modules)
FlocMod1CouplingFrz := FreezeLayer("FlocModCouplingPlu")  # must freeze this layer to ensure it gets grouped
FlocMod1PipeSelect := SelectLayer("FlocModPipePlu")
FlocModLongPipeLast := PipeF(FittedCapLast_Origin, L_FlocModuleLong[last(L_FlocModuleLong)], [0; 0]*deg, ND_FlocModulesMain, PS_Modules)
ArrayFlocModXLast := ArrayLast(1, N_FlocChannelModulesLong[last(N_FlocChannelModulesLong)], -(B_FlocBaffle[last(B_FlocBaffle)]*N_FlocChannelBafflesLong[last(N_FlocChannelBafflesLong)]))
FlocModConnectorPipeLast :=
    PipeF(ConnectorPipeLast_Origin, S_FlocBaffle[last(S_FlocBaffle)] - CouplingLength(ND_FlocModulesMain) + SocketDepth(ND_FlocModulesMain) - CapThickness(ND_FlocModulesLarge), [0; 0]*deg, ND_FlocModulesMain, PS_Modules) if N_FlocChannelModulesLong[last(N_FlocChannelModulesLong)] - 1 < 2
    stack(PipeF(ConnectorPipeLast_Origin, S_FlocBaffle[last(S_FlocBaffle)] - CouplingLength(ND_FlocModulesMain) + SocketDepth(ND_FlocModulesMain) - CapThickness(ND_FlocModulesLarge), [0; 0]*deg, ND_FlocModulesMain, PS_Modules), ArrayLast(1, N_FlocChannelModulesLong[last(N_FlocChannelModulesLong)] - 1, -(B_FlocBaffle[last(B_FlocBaffle)]*N_FlocChannelBafflesLong[last(N_FlocChannelBafflesLong)]))) otherwise
LastFlocModConnectorPipe := PipeF([
    Plant_Origin[0] - L_Sed + X_FlocBaffles[0, N_FlocChannels - 1] - CouplingLength(ND_FlocModulesMain) + SocketDepth(ND_FlocModulesMain);
    ConnectorPipeLast_Origin[1];
    ConnectorPipeLast_Origin[2]
], X_FlocBaffles[0, N_FlocChannels - 1] - CouplingLength(ND_FlocModulesMain) + SocketDepth(ND_FlocModulesMain), [0; 0]*deg, ND_FlocModulesMain, PS_Modules)
LastFlocModShortPipe :=
    if N_FlocChannelBafflesShort[last(N_FlocChannelBafflesShort)] ≠ 0
        PipeF([
            (Plant_Origin[0] - X_FlocBaffles[N_FlocChannelBafflesLong[last(N_FlocChannelBafflesLong)]*N_FlocChannelModulesLong[last(N_FlocChannelModulesLong)], N_FlocChannels - 1]) - CapThickness(ND_FlocModulesMain) - T_FlocBaffle;
            ConnectorPipeLast_Origin[1];
            ConnectorPipeLast_Origin[2]
        ], L_FlocModuleShort[last(L_FlocModuleShort)], [0; 0]*deg, ND_FlocModulesMain, PS_Modules)
    "0" otherwise
FlocModEndPipeLast := PipeF([
    Floc_Origin[0] - X_FlocBaffles[N_FlocChannelBaffles[last(N_FlocChannelBaffles)] - 1, N_FlocChannels - 1] - T_FlocBaffle - CouplingLength(ND_FlocModulesMain) + SocketDepth(ND_FlocModulesMain);
    FittedCapLast_Origin[1];
    FittedCapLast_Origin[1]
], L_Sed - X_FlocBaffles[N_FlocChannelBaffles[last(N_FlocChannelBaffles)] - 1, N_FlocChannels - 1] - CouplingLength(ND_FlocModulesMain) + SocketDepth(ND_FlocModulesMain) - T_FlocBaffle, [0; 0]*deg, ND_FlocModulesMain, PS_Modules)
# FlocModPipeFrz
FlocModSpacerPipeLast :=
    Local ← stack(SelectLayer("FlocModSpacerPlu"), PipeF(FittedCapLast_Origin + [CapThickness(ND_FlocModulesMain) - CapHeight(ND_FlocModulesMain); 0; 0], S_FlocBaffle[N_FlocChannels - 1] - CapHeight(ND_FlocModulesMain), [0; 0]*deg, ND_SpacerPipe, PS_Modules), ArrayFlocModXLast)
    if N_FlocChannelBafflesLong[N_FlocChannels - 1] > 2
        for i ∈ 0 .. N_FlocChannelBafflesLong[N_FlocChannels - 1] - 3
            Local ← stack(Local, PipeF(FittedCapLast_Origin - [
                S_FlocBaffle[0] - CapThickness(ND_FlocModulesMain) + T_FlocBaffle + B_FlocBaffle[N_FlocChannels - 1]*i;
                0;
                0
            ], S_FlocBaffle[N_FlocChannels - 1], [0; 0]*deg, ND_SpacerPipe, PS_Modules), ArrayFlocModXLast)
    Local
SelectFlocMod1Spacer := SelectLayer("FlocModSpacerPlu")
FlocModSpacerPipeLastShort1 :=
    if N_FlocChannelBafflesShort[last(N_FlocChannelBafflesShort)] ≠ 0
        PipeF([
            Plant_Origin[0] - X_FlocBaffles[N_FlocChannelBafflesLong[last(N_FlocChannelBafflesLong)]*N_FlocChannelModulesLong[last(N_FlocChannelModulesLong)], N_FlocChannels - 1] - CapHeight(ND_FlocModulesMain) - T_FlocBaffle;
            FittedCapLast_Origin[1];
            FittedCapLast_Origin[2]
        ], S_FlocBaffle[N_FlocChannels - 1] - CapHeight(ND_FlocModulesMain), [0; 0]*deg, ND_SpacerPipe, PS_Modules)
    "0" otherwise
FlocModSpacerPipeLastShort2 :=
    if N_FlocChannelBafflesShort[last(N_FlocChannelBafflesShort)] ≠ 0
        PipeF([
            Plant_Origin[0] - X_FlocBaffles[(N_FlocChannelBafflesShort[last(N_FlocChannelBafflesShort)] ≠ 0)*(N_FlocChannelBafflesLong[last(N_FlocChannelBafflesLong)]*N_FlocChannelModulesLong[last(N_FlocChannelModulesLong)] + 1), N_FlocChannels - 1] - T_FlocBaffle;
            FittedCapLast_Origin[1];
            FittedCapLast_Origin[2]
        ], S_FlocBaffle[N_FlocChannels - 1], [0; 0]*deg, ND_SpacerPipe, PS_Modules)
    "0" otherwise
ArrayModSpacerShortLast := ArrayLast(1, N_FlocChannelBafflesShort[last(N_FlocChannelBafflesShort)] - 2, -B_FlocBaffle[last(B_FlocBaffle)])
FlocModSpacerPipeLastShortEnd := PipeF([
    Plant_Origin[0] - X_FlocBaffles[N_FlocChannelBaffles[last(N_FlocChannelBaffles)] - 1, N_FlocChannels - 1] - T_FlocBaffle;
    FittedCapLast_Origin[1];
    FittedCapLast_Origin[2]
], L_Sed - X_FlocBaffles[N_FlocChannelBaffles[last(N_FlocChannelBaffles)] - 1, N_FlocChannels - 1], [0; 0]*deg, ND_SpacerPipe, PS_Modules)
# SelectFlocModCoupling
FlocModCouplingLastEnd := CouplingF([
    Floc_Origin[0] - X_FlocBaffles[N_FlocChannelBaffles[last(N_FlocChannelBaffles)] - 1, N_FlocChannels - 1] - T_FlocBaffle - SocketDepth(ND_FlocModulesMain);
    FittedCapLast_Origin[1];
    FittedCapLast_Origin[2]
], [0; 0]*deg, ND_FlocModulesMain, PS_Modules)
# FlocModCouplingFrz
FlocModSpacerShortLast :=
    stack(SelectFlocMod1Spacer, FlocModSpacerPipeLastShort1, FlocMod1SpacerFrz) if N_FlocChannelBafflesShort[last(N_FlocChannelBafflesShort)] == 2
    stack(SelectFlocMod1Spacer, FlocModSpacerPipeLastShort1, FlocModSpacerPipeLastShort2, ArrayModSpacerShortLast, FlocMod1SpacerFrz) otherwise
FlocModLast :=
    stack(SelectFlocMod1PipeCap, FlocModLargeCapLast, ArrayFlocModXCap, FlocModFittedCapLast, ArrayFlocModXCap, FlocMod1CapFrz, FlocMod1CouplingSelect, FlocModCouplingLast, ArrayFlocModXLast, FlocMod1CouplingFrz, FlocMod1PipeSelect, FlocModLongPipeLast, ArrayFlocModXLast, FlocModConnectorPipeLast, LastFlocModConnectorPipe, FlocMod1PipeFrz, FlocModSpacerPipeLast, FrzFlocModComponents) if N_FlocChannelBafflesShort[last(N_FlocChannelBafflesShort)] == 0
    stack(SelectFlocMod1PipeCap, FlocModLargeCapLast, ArrayFlocModXCap, FlocModFittedCapLast, ArrayFlocModXCap, FlocMod1CapFrz, FlocMod1CouplingSelect, FlocModCouplingLast, ArrayFlocModXLast, FlocMod1CouplingFrz, FlocMod1PipeSelect, FlocModLongPipeLast, ArrayFlocModXLast, FlocModConnectorPipeLast, LastFlocModShortPipe, FlocModEndPipeLast, FlocMod1PipeFrz, SelectFlocMod1Coupling, FlocModCouplingLastEnd, FlocMod1CouplingFrz, FlocModSpacerPipeLast, FrzFlocModComponents) otherwise
ThawAllFlocModules := ThawMultiple(["FlocMod*Plu"])
ArrayFlocModY := array_all(2, 1, -W_FlocChannel + 4*S_Fitting)
# ArrayModulesY and ArrayModulesZ array new pipes to within 0.05m of each wall.
ArrayFlocModZ := array_all(3, 1, (-S_ModulePipesV*4 + .1 m)/2)
FlocModulesOverlapping :=
    FlocMod1Overlap if N_SedTanks == 1 and N_SedBays == 1
    stack(FlocMod1Overlap, FlocModLast, ThawAllFlocModules, ArrayFlocModY, view("f"), ArrayFlocModZ, view("t"), FrzFlocModComponents) otherwise
# Module Piping for Beginning Channels (non-overlapping)
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# FlocMod1CapLayer
FlocModLargeCapUpper := CapF([
    LargeCap_Origin[0] + B_FlocBaffle[0];
    LargeCap_Origin[1];
    Floc_Origin[2] + H_Floc - 0.5*H_PlantFreeboard - S_Fitting - ConRadius(ND_FlocModulesLarge)
], [0; 0]*deg, ND_FlocModulesLarge)
FlocModLargeCapMiddle := CapF(LargeCap_Origin, [0; 0]*deg, ND_FlocModulesLarge)
FlocModLargeCapLower := CapF([
    LargeCap_Origin[0];
    LargeCap_Origin[1];
    Floc_Origin[2] + S_Fitting + L_BafflePort + ConRadius(ND_FlocModulesLarge)
], [0; 0]*deg, ND_FlocModulesLarge)
FlocModFittedCapUpper := CapF([
    FittedCap_Origin[0] + B_FlocBaffle[0];
    FittedCap_Origin[1];
    Floc_Origin[2] + H_Floc - 0.5*H_PlantFreeboard - S_Fitting - ConRadius(ND_FlocModulesLarge)
], [180; 0]*deg, ND_FlocModulesMain)
FlocModFittedCapMiddle := CapF(FittedCap_Origin, [180; 0]*deg, ND_FlocModulesMain)
FlocModFittedCapLower := CapF([
    FittedCap_Origin[0];
    FittedCap_Origin[1];
    Floc_Origin[2] + S_Fitting + L_BafflePort + ConRadius(ND_FlocModulesLarge)
], [180; 0]*deg, ND_FlocModulesMain)
# FlocMod1CapFrz
# FlocMod1CouplingLayer
FlocModCouplingUpper := CouplingF([
    ModuleCoupling_Origin[0];
    ModuleCoupling_Origin[1];
    Floc_Origin[2] + H_Floc - 0.5*H_PlantFreeboard - S_Fitting - ConRadius(ND_FlocModulesLarge)
], [0; 0]*deg, ND_FlocModulesMain, PS_Modules)
FlocModCouplingMiddle := CouplingF(ModuleCoupling_Origin, [0; 0]*deg, ND_FlocModulesMain, PS_Modules)
FlocModCouplingLower := CouplingF([
    ModuleCoupling_Origin[0] - B_FlocBaffle[0];
    ModuleCoupling_Origin[1];
    Floc_Origin[2] + S_Fitting + L_BafflePort + ConRadius(ND_FlocModulesLarge)
], [0; 0]*deg, ND_FlocModulesMain, PS_Modules)
# FlocMod1CouplingFrz | must freeze this layer to ensure it gets grouped
# FlocMod1PipeLayer
FlocModLongPipeUpper := PipeF([
    FittedCap_Origin[0] + L_FlocModuleLongOuter[0] + B_FlocBaffle[0];
    FittedCap_Origin[1];
    Floc_Origin[2] + H_Floc - 0.5*H_PlantFreeboard - S_Fitting - ConRadius(ND_FlocModulesLarge)
], L_FlocModuleLongOuter[0], [0; 0]*deg, ND_FlocModulesMain, PS_Modules)
FlocModLongPipeMiddle := PipeF(LongPipe_Origin, L_FlocModuleLong[0], [0; 0]*deg, ND_FlocModulesMain, PS_Modules)
FlocModLongPipeLower := PipeF([
    FittedCap_Origin[0] + L_FlocModuleLongOuter[0];
    FittedCap_Origin[1];
    Floc_Origin[2] + S_Fitting + L_BafflePort + ConRadius(ND_FlocModulesLarge)
], L_FlocModuleLongOuter[0], [0; 0]*deg, ND_FlocModulesMain, PS_Modules)
# FlocMod1PipeFrz
FlocModConnectPipeLayer := layer_new("FlocModConnectPipePlu", blue)
FlocModConnectorPipeUpper := PipeF([
    ConnectorPipe_Origin[0] + B_FlocBaffle[0];
    ConnectorPipe_Origin[1];
    Floc_Origin[2] + H_Floc - 0.5*H_PlantFreeboard - S_Fitting - ConRadius(ND_FlocModulesLarge)
], L_FlocModuleConnectorOuter[0], [0; 0]*deg, ND_FlocModulesMain, PS_Modules)
FlocModConnectorPipeMiddle := PipeF(ConnectorPipe_Origin, L_FlocModuleConnector[0], [0; 0]*deg, ND_FlocModulesMain, PS_Modules)
FlocModConnectorPipeLower := PipeF([
    ConnectorPipe_Origin[0];
    ConnectorPipe_Origin[1];
    Floc_Origin[2] + S_Fitting + L_BafflePort + ConRadius(ND_FlocModulesLarge)
], L_FlocModuleConnectorOuter[0], [0; 0]*deg, ND_FlocModulesMain, PS_Modules)
FlocModConnectPipeFrz := FreezeLayer("FlocModConnectPipePlu")
FlocMod1SpacerLayer := layer_new("FlocModSpacerPlu", blue)
FlocModSpacerPipe1Middle := PipeF(FittedCap_Origin + [S_FlocBaffle[0] - CapThickness(ND_FlocModulesMain); 0; 0], S_FlocBaffle[0] - CapHeight(ND_FlocModulesMain), [0; 0]*deg, ND_SpacerPipe, PS_Modules)
FlocModSpacerPipe2Middle := PipeF(FittedCap_Origin + [2*S_FlocBaffle[0] - CapThickness(ND_FlocModulesMain) + T_FlocBaffle; 0; 0], S_FlocBaffle[0], [0; 0]*deg, ND_SpacerPipe, PS_Modules)
# ArrayFlocModSpacer
FlocModSpacerUpper1 := PipeF([
    Floc_Origin[0] - L_Sed + X_FlocBaffles[1, 0] + 2*B_FlocBaffle[0];
    FittedCap_Origin[1];
    Floc_Origin[2] + H_Floc - 0.5*H_PlantFreeboard - S_Fitting - ConRadius(ND_FlocModulesLarge)
], 2*S_FlocBaffle[0] - CapHeight(ND_FlocModulesMain) + T_FlocBaffle, [0; 0]*deg, ND_SpacerPipe, PS_Modules)
FlocModSpacerUpper2 := PipeF([
    Floc_Origin[0] - L_Sed + X_FlocBaffles[1, 0] + 4*B_FlocBaffle[0];
    FittedCap_Origin[1];
    Floc_Origin[2] + H_Floc - 0.5*H_PlantFreeboard - S_Fitting - ConRadius(ND_FlocModulesLarge)
], 2*S_FlocBaffle[0] + T_FlocBaffle, [0; 0]*deg, ND_SpacerPipe, PS_Modules)
FlocModSpacerLower1 := PipeF([
    Floc_Origin[0] - L_Sed + X_FlocBaffles[0, 0] + 2*B_FlocBaffle[0];
    FittedCap_Origin[1];
    Floc_Origin[2] + S_Fitting + L_BafflePort + ConRadius(ND_FlocModulesLarge)
], 2*S_FlocBaffle[0] - CapHeight(ND_FlocModulesMain) + T_FlocBaffle, [0; 0]*deg, ND_SpacerPipe, PS_Modules)
FlocModSpacerLower2 := PipeF([
    Floc_Origin[0] - L_Sed + X_FlocBaffles[0, 0] + 4*B_FlocBaffle[0];
    FittedCap_Origin[1];
    Floc_Origin[2] + S_Fitting + L_BafflePort + ConRadius(ND_FlocModulesLarge)
], 2*S_FlocBaffle[0] + T_FlocBaffle, [0; 0]*deg, ND_SpacerPipe, PS_Modules)
ArrayFlocModSpacerOuter := ArrayLast(1, (N_FlocChannelBafflesLong[0] - 2)/2, 2*B_FlocBaffle[0])
# FlocMod1SpacerFrz
FlocMod1SpacerNO :=
    stack(FlocMod1SpacerLayer, FlocModSpacerPipe1Middle, FlocModSpacerPipe2Middle, ArrayFlocModSpacer, FlocModSpacerUpper1, FlocModSpacerLower1, FlocMod1SpacerFrz) if N_FlocChannelBafflesLong[0] == 4
    stack(FlocMod1SpacerLayer, FlocModSpacerPipe1Middle, FlocModSpacerPipe2Middle, ArrayFlocModSpacer, FlocModSpacerUpper1, FlocModSpacerUpper2, FlocModSpacerLower1, FlocModSpacerLower2, FlocMod1SpacerFrz) if N_FlocChannelBafflesLong[0] == 6
    stack(FlocMod1SpacerLayer, FlocModSpacerPipe1Middle, FlocModSpacerPipe2Middle, ArrayFlocModSpacer, FlocModSpacerUpper1, FlocModSpacerUpper2, ArrayFlocModSpacerOuter, FlocModSpacerLower1, FlocModSpacerLower2, ArrayFlocModSpacerOuter, FlocMod1SpacerFrz) otherwise
ThawFlocModPieces := ThawMultiple(["FlocModCapPlu"; "FlocModPipePlu"; "FlocModSpacerPlu"; "FlocModCouplingPlu"])
# ArrayFlocModX
# FrzFlocModComponents
ThawFlocModPieces2 := ThawMultiple(["FlocModConnectPipePlu"])
ArrayFlocModXLess := array_all(1, N_FlocChannelModulesLong[0] - 1, B_FlocBaffle[0]*N_FlocChannelBafflesLong[0])
# FrzFlocModComponents
FlocModThawArray :=
    stack(ThawFlocModPieces, ArrayFlocModX, FrzFlocModComponents) if N_FlocChannelModulesLong[0] == 2
    stack(ThawFlocModPieces, ArrayFlocModX, FrzFlocModComponents, ThawFlocModPieces2, ArrayFlocModXLess, FrzFlocModComponents) otherwise
# SelectFlocMod1Spacer
FlocModSpacerPipe1Short := PipeF([
    Plant_Origin[0] - X_FlocBaffles[(N_FlocChannelBafflesShort[0] - 2)*(N_FlocChannelBafflesShort[0] > 2), 0] - T_FlocBaffle;
    FittedCap_Origin[1];
    FittedCap_Origin[2]
], S_FlocBaffle[0] - CapHeight(ND_FlocModulesMain), [0; 0]*deg, ND_SpacerPipe, PS_Modules)
FlocModSpacerPipe2Short := PipeF([
    Plant_Origin[0] - X_FlocBaffles[(N_FlocChannelBafflesShort[0] - 3)*(N_FlocChannelBafflesShort[0] > 2), 0] - T_FlocBaffle;
    FittedCap_Origin[1];
    FittedCap_Origin[2]
], S_FlocBaffle[0], [0; 0]*deg, ND_SpacerPipe, PS_Modules)
ArrayFlocModSpacerShort := ArrayLast(1, N_FlocChannelBafflesShort[0] - 2, B_FlocBaffle[0])
FlocModSpacerLowerEnd := PipeF([
    Plant_Origin[0] - X_FlocBaffles[(N_FlocChannelBafflesShort[0] - 3)*(N_FlocChannelBafflesShort[0] > 2), 0] - T_FlocBaffle;
    FittedCap_Origin[1];
    Floc_Origin[2] + S_Fitting + L_BafflePort + ConRadius(ND_FlocModulesLarge)
], 2*S_FlocBaffle[0] - CapHeight(ND_FlocModulesMain) + T_FlocBaffle, [0; 0]*deg, ND_SpacerPipe, PS_Modules)
ArrayFlocModSpacerShortLower := ArrayLast(1, floor((N_FlocChannelBafflesShort[0] - 2)/2), B_FlocBaffle[0])
FlocModSpacerUpper := PipeF([
    Plant_Origin[0] - X_FlocBaffles[(N_FlocChannelBafflesShort[0] - 3)*(N_FlocChannelBafflesShort[0] > 2), 0] + S_FlocBaffle[0];
    FittedCap_Origin[1];
    Floc_Origin[2] + H_Floc - 0.5*H_PlantFreeboard - S_Fitting - ConRadius(ND_FlocModulesLarge)
], 2*S_FlocBaffle[0] - CapHeight(ND_FlocModulesMain) + T_FlocBaffle, [0; 0]*deg, ND_SpacerPipe, PS_Modules)
ArrayFlocModSpacerShortUpper := ArrayLast(1, floor((N_FlocChannelBafflesShort[0] - 2)/2) - 1, B_FlocBaffle[0])
FlocShortBaffleSpacers1 :=
    stack(SelectFlocMod1Spacer, FlocModSpacerPipe1Short, FlocModSpacerPipe2Short, FlocModSpacerLowerEnd) if N_FlocChannelBafflesShort[0] == 3
    stack(SelectFlocMod1Spacer, FlocModSpacerPipe1Short, FlocModSpacerPipe2Short, ArrayFlocModSpacerShort, FlocModSpacerLowerEnd, ArrayFlocModSpacerShortLower, FlocModSpacerUpper) if N_FlocChannelBafflesShort[0] == 5
    stack(SelectFlocMod1Spacer, FlocModSpacerPipe1Short, FlocModSpacerPipe2Short, ArrayFlocModSpacerShort, FlocModSpacerLowerEnd, ArrayFlocModSpacerShortLower, FlocModSpacerUpper, ArrayFlocModSpacerShortUpper) otherwise
# FlocModSpacerFrz
SelectFlocMod1Piping := SelectLayer("FlocModPipePlu")
FlocModPipeShortUpper := PipeF([
    Plant_Origin[0] - X_FlocBaffles[1, 0] + SocketDepth(ND_FlocModulesMain);
    FittedCap_Origin[1];
    Floc_Origin[2] + S_Fitting + L_BafflePort + ConRadius(ND_FlocModulesLarge)
], (N_FlocChannelBafflesShort[0] - 3)*(S_FlocBaffle[0] + T_FlocBaffle) - CapThickness(ND_FlocModulesMain) + SocketDepth(ND_FlocModulesMain), [0; 0]*deg, ND_FlocModulesMain, PS_Modules) = ["_cylinder -0.26946,3.44766,0.13204 0.01067 a -0.26878,3.44766,0.13204"; "_cylinder -0.25946,3.44766,0.13204 0.00966 a -0.27878,3.44766,0.13204"; "_zoom w -0.27878,3.42699,0.13204 -0.25878,3.46833,0.13204"; "_subtract -0.26878,3.45833,0.13204  -0.27878,3.45732,0.13204 "]
FlocModPipeShortMiddle := PipeF([
    Plant_Origin[0] - X_FlocBaffles[0, 0] + SocketDepth(ND_FlocModulesMain);
    FittedCap_Origin[1];
    FittedCap_Origin[2]
], (N_FlocChannelBafflesShort[0] - 1)*(S_FlocBaffle[0] + T_FlocBaffle) - CapThickness(ND_FlocModulesMain) + SocketDepth(ND_FlocModulesMain), [0; 0]*deg, ND_FlocModulesMain, PS_Modules)
FlocModPipeShortLower := PipeF([
    Plant_Origin[0] - X_FlocBaffles[0, 0] + SocketDepth(ND_FlocModulesMain);
    FittedCap_Origin[1];
    Floc_Origin[2] + S_Fitting + L_BafflePort + ConRadius(ND_FlocModulesLarge)
], (N_FlocChannelBafflesShort[0] - 1)*(S_FlocBaffle[0] + T_FlocBaffle) - CapThickness(ND_FlocModulesMain) + SocketDepth(ND_FlocModulesMain), [0; 0]*deg, ND_FlocModulesMain, PS_Modules)
FlocModEndPipeUpper := PipeF([
    Floc_Origin[0];
    LargeCap_Origin[1];
    Floc_Origin[2] + H_Floc - 0.5*H_PlantFreeboard - S_Fitting - ConRadius(ND_FlocModulesLarge)
], {
    (2*S_FlocBaffle[0] + T_FlocBaffle - CapThickness(ND_FlocModulesMain)) if N_FlocChannelBafflesShort[0] == 3
    (2*S_FlocBaffle[0] + T_FlocBaffle - CouplingLength(ND_FlocModulesMain) + SocketDepth(ND_FlocModulesMain)) otherwise
}, [0; 0]*deg, ND_FlocModulesMain, PS_Modules)
FlocModEndPipeMiddle := PipeF([Floc_Origin[0]; LargeCap_Origin[1]; LargeCap_Origin[2]], {
    (S_FlocBaffle[0] - CapThickness(ND_FlocModulesMain)) if N_FlocChannelBafflesShort[0] == 1
    (S_FlocBaffle[0] - CouplingLength(ND_FlocModulesMain) + SocketDepth(ND_FlocModulesMain)) otherwise
}, [0; 0]*deg, ND_FlocModulesMain, PS_Modules)
FlocModEndPipeLower := PipeF([
    Floc_Origin[0];
    LargeCap_Origin[1];
    Floc_Origin[2] + S_Fitting + L_BafflePort + ConRadius(ND_FlocModulesLarge)
], {
    (S_FlocBaffle[0] - CapThickness(ND_FlocModulesMain)) if N_FlocChannelBafflesShort[0] == 1
    (S_FlocBaffle[0] - CouplingLength(ND_FlocModulesMain) + SocketDepth(ND_FlocModulesMain)) otherwise
}, [0; 0]*deg, ND_FlocModulesMain, PS_Modules)
# FlocModPipeFrz
FlocModShortAndEndPipes :=
    stack(SelectFlocMod1Piping, FlocModEndPipeUpper, FlocModEndPipeMiddle, FlocModEndPipeLower, FlocMod1PipeFrz) if N_FlocChannelBafflesShort[0] == 1
    stack(SelectFlocMod1Piping, FlocModEndPipeUpper, FlocModEndPipeMiddle, FlocModEndPipeLower, FlocModPipeShortMiddle, FlocModPipeShortLower, FlocMod1PipeFrz) if N_FlocChannelBafflesShort[0] == 3
    stack(SelectFlocMod1Piping, FlocModEndPipeUpper, FlocModEndPipeMiddle, FlocModEndPipeLower, FlocModPipeShortUpper, FlocModPipeShortMiddle, FlocModPipeShortLower, FlocMod1PipeFrz) otherwise
SelectFlocMod1PipeCap := SelectLayer("FlocModCapPlu")
FlocModEndLargeCapUpper :=
    if N_FlocChannelBafflesShort[0] > 1
        CapF([
            Floc_Origin[0] - X_FlocBaffles[N_FlocChannelBafflesShort[0] - 2, 0] - T_FlocBaffle - CapThickness(ND_FlocModulesLarge);
            LargeCap_Origin[1];
            Floc_Origin[2] + H_Floc - 0.5*H_PlantFreeboard - S_Fitting - ConRadius(ND_FlocModulesLarge)
        ], [0; 0]*deg, ND_FlocModulesLarge)
    "0" otherwise
FlocModEndLargeCapMiddle :=
    if N_FlocChannelBafflesShort[0] > 0
        CapF([
            Floc_Origin[0] - X_FlocBaffles[N_FlocChannelBafflesShort[0] - 1, 0] - T_FlocBaffle - CapThickness(ND_FlocModulesLarge);
            LargeCap_Origin[1];
            LargeCap_Origin[2]
        ], [0; 0]*deg, ND_FlocModulesLarge)
    "0" otherwise
FlocModEndLargeCapLower :=
    if N_FlocChannelBafflesShort[0] > 0
        CapF([
            Floc_Origin[0] - X_FlocBaffles[N_FlocChannelBafflesShort[0] - 1, 0] - T_FlocBaffle - CapThickness(ND_FlocModulesLarge);
            LargeCap_Origin[1];
            Floc_Origin[2] + S_Fitting + L_BafflePort + ConRadius(ND_FlocModulesLarge)
        ], [0; 0]*deg, ND_FlocModulesLarge)
    "0" otherwise
FlocModEndFittedCapUpper :=
    if N_FlocChannelBafflesShort[0] > 1
        CapF([
            Floc_Origin[0] - X_FlocBaffles[N_FlocChannelBafflesShort[0] - 2, 0] + CapThickness(ND_FlocModulesMain);
            LargeCap_Origin[1];
            Floc_Origin[2] + H_Floc - 0.5*H_PlantFreeboard - S_Fitting - ConRadius(ND_FlocModulesLarge)
        ], [180; 0]*deg, ND_FlocModulesMain)
    "0" otherwise
FlocModEndFittedCapMiddle :=
    if N_FlocChannelBafflesShort[0] > 0
        CapF([
            Floc_Origin[0] - X_FlocBaffles[N_FlocChannelBafflesShort[0] - 1, 0] + CapThickness(ND_FlocModulesMain);
            LargeCap_Origin[1];
            LargeCap_Origin[2]
        ], [180; 0]*deg, ND_FlocModulesMain)
    "0" otherwise
FlocModEndFittedCapLower :=
    if N_FlocChannelBafflesShort[0] > 0
        CapF([
            Floc_Origin[0] - X_FlocBaffles[N_FlocChannelBafflesShort[0] - 1, 0] + CapThickness(ND_FlocModulesMain);
            LargeCap_Origin[1];
            Floc_Origin[2] + S_Fitting + L_BafflePort + ConRadius(ND_FlocModulesLarge)
        ], [180; 0]*deg, ND_FlocModulesMain)
    "0" otherwise
# FlocModCapFrz
FlocModCapsEnd :=
    stack(SelectFlocMod1PipeCap, FlocModEndLargeCapMiddle, FlocModEndLargeCapLower, FlocModEndFittedCapMiddle, FlocModEndFittedCapLower, FlocMod1CapFrz) if N_FlocChannelBafflesShort[0] == 1
    stack(SelectFlocMod1PipeCap, FlocModEndLargeCapUpper, FlocModEndLargeCapMiddle, FlocModEndLargeCapLower, FlocModEndFittedCapUpper, FlocModEndFittedCapMiddle, FlocModEndFittedCapLower, FlocMod1CapFrz) otherwise
# only if the short baffle doesn't have one baffle!!!
# SelectFlocMod1Coupling
EndFlocModCouplingUpper := CouplingF([
    Floc_Origin[0] - X_FlocBaffles[1, 0] + CouplingLength(ND_FlocModulesMain) - SocketDepth(ND_FlocModulesMain);
    ModuleCoupling_Origin[1];
    Floc_Origin[2] + H_Floc - 0.5*H_PlantFreeboard - S_Fitting - ConRadius(ND_FlocModulesLarge)
], [0; 0]*deg, ND_FlocModulesMain, PS_Modules)
EndFlocModCouplingMiddle := CouplingF([
    Floc_Origin[0] - X_FlocBaffles[0, 0] + CouplingLength(ND_FlocModulesMain) - SocketDepth(ND_FlocModulesMain);
    ModuleCoupling_Origin[1];
    ModuleCoupling_Origin[2]
], [0; 0]*deg, ND_FlocModulesMain, PS_Modules)
EndFlocModCouplingLower := CouplingF([
    Floc_Origin[0] - X_FlocBaffles[0, 0] + CouplingLength(ND_FlocModulesMain) - SocketDepth(ND_FlocModulesMain);
    ModuleCoupling_Origin[1];
    Floc_Origin[2] + S_Fitting + L_BafflePort + ConRadius(ND_FlocModulesLarge)
], [0; 0]*deg, ND_FlocModulesMain, PS_Modules)
# FlocMod1CouplingFrz
FlocModCouplingsEnd :=
    stack(SelectFlocMod1Coupling, EndFlocModCouplingMiddle, EndFlocModCouplingLower, FlocMod1CouplingFrz) if N_FlocChannelBafflesShort[0] == 3
    stack(SelectFlocMod1Coupling, EndFlocModCouplingUpper, EndFlocModCouplingMiddle, EndFlocModCouplingLower, FlocMod1CouplingFrz) otherwise
SelectFlocModConnectPipe := SelectLayer("FlocModConnectPipePlu")
FlocModConnectPipeEndUpper :=
    if Q_Plant > Q_PlantMaxLF
        PipeF([
            Floc_Origin[0] - X_FlocBaffles[N_FlocChannelBafflesShort[0], 0] + CouplingLength(ND_FlocModulesMain) - SocketDepth(ND_FlocModulesMain) + L_FlocModuleConnectorOuter[0];
            ModuleCoupling_Origin[1];
            Floc_Origin[2] + H_Floc - 0.5*H_PlantFreeboard - S_Fitting - ConRadius(ND_FlocModulesLarge)
        ], L_FlocModuleConnectorOuter[0], [0; 0]*deg, ND_FlocModulesMain, PS_Modules)
    "null" otherwise
FlocModConnectPipeEndMiddle :=
    if Q_Plant > Q_PlantMaxLF
        PipeF([
            Floc_Origin[0] - X_FlocBaffles[N_FlocChannelBafflesShort[0], 0] + CouplingLength(ND_FlocModulesMain) - SocketDepth(ND_FlocModulesMain) + L_FlocModuleConnector[0];
            ModuleCoupling_Origin[1];
            ModuleCoupling_Origin[2]
        ], L_FlocModuleConnector[0], [0; 0]*deg, ND_FlocModulesMain, PS_Modules)
    "null" otherwise
FlocModConnectPipeEndLower :=
    if Q_Plant > Q_PlantMaxLF
        PipeF([
            Floc_Origin[0] - X_FlocBaffles[N_FlocChannelBafflesShort[0] + 1, 0] + CouplingLength(ND_FlocModulesMain) - SocketDepth(ND_FlocModulesMain) + L_FlocModuleConnectorOuter[0];
            ModuleCoupling_Origin[1];
            Floc_Origin[2] + S_Fitting + L_BafflePort + ConRadius(ND_FlocModulesLarge)
        ], L_FlocModuleConnectorOuter[0], [0; 0]*deg, ND_FlocModulesMain, PS_Modules)
    "null" otherwise
# FlocModConnectPipeFrz
EndFlocModConPipe :=
    stack(SelectFlocModConnectPipe, FlocModConnectPipeEndMiddle, FlocModConnectPipeEndLower, FlocModConnectPipeFrz) if N_FlocChannelBafflesShort[0] == 1
    stack(SelectFlocModConnectPipe, FlocModConnectPipeEndUpper, FlocModConnectPipeEndMiddle, FlocModConnectPipeEndLower, FlocModConnectPipeFrz) otherwise
# ThawFlocModComponents
ArrayTankModules := array_all(N_FlocChannels - 1, 1, -(W_FlocChannel + T_PlantWall))
# MirrorTankModules
FlocMod1NoOverlap :=
    stack(FlocMod1CapLayer, FlocModLargeCapUpper, FlocModLargeCapMiddle, FlocModLargeCapLower, FlocModFittedCapUpper, FlocModFittedCapMiddle, FlocModFittedCapLower, FlocMod1CapFrz, FlocMod1CouplingLayer, FlocModCouplingUpper, FlocModCouplingMiddle, FlocModCouplingLower, FlocMod1CouplingFrz, FlocMod1PipeLayer, FlocModLongPipeUpper, FlocModLongPipeMiddle, FlocModLongPipeLower, FlocMod1PipeFrz, FlocModConnectPipeLayer, FlocModConnectorPipeUpper, FlocModConnectorPipeMiddle, FlocModConnectorPipeLower, FlocModConnectPipeFrz, FlocMod1SpacerNO, FlocModThawArray, FlocModCapsEnd, EndFlocModConPipe, FlocModShortAndEndPipes, ThawFlocMod1Components, ArrayTankModules, MirrorTankModules, FrzFlocModComponents) if N_FlocChannelBafflesShort[0] < 2 and (N_FlocChannels > 2 or N_SedBays == 1 and N_SedTanks == 1)
    stack(FlocMod1CapLayer, FlocModLargeCapUpper, FlocModLargeCapMiddle, FlocModLargeCapLower, FlocModFittedCapUpper, FlocModFittedCapMiddle, FlocModFittedCapLower, FlocMod1CapFrz, FlocMod1CouplingLayer, FlocModCouplingUpper, FlocModCouplingMiddle, FlocModCouplingLower, FlocMod1CouplingFrz, FlocMod1PipeLayer, FlocModLongPipeUpper, FlocModLongPipeMiddle, FlocModLongPipeLower, FlocMod1PipeFrz, FlocModConnectPipeLayer, FlocModConnectorPipeUpper, FlocModConnectorPipeMiddle, FlocModConnectorPipeLower, FlocModConnectPipeFrz, FlocMod1SpacerNO, FlocModThawArray, FlocShortBaffleSpacers1, FlocMod1SpacerFrz, FlocModCapsEnd, FlocModCouplingsEnd, EndFlocModConPipe, FlocModShortAndEndPipes, ThawFlocMod1Components, ArrayTankModules, MirrorTankModules, FrzFlocModComponents) if N_FlocChannelBafflesShort[0] > 2 and (N_FlocChannels > 2 or N_SedBays == 1 and N_SedTanks == 1)
    stack(FlocMod1CapLayer, FlocModLargeCapUpper, FlocModLargeCapMiddle, FlocModLargeCapLower, FlocModFittedCapUpper, FlocModFittedCapMiddle, FlocModFittedCapLower, FlocMod1CapFrz, FlocMod1CouplingLayer, FlocModCouplingUpper, FlocModCouplingMiddle, FlocModCouplingLower, FlocMod1CouplingFrz, FlocMod1PipeLayer, FlocModLongPipeUpper, FlocModLongPipeMiddle, FlocModLongPipeLower, FlocMod1PipeFrz, FlocModConnectPipeLayer, FlocModConnectorPipeUpper, FlocModConnectorPipeMiddle, FlocModConnectorPipeLower, FlocModConnectPipeFrz, FlocMod1SpacerNO, FlocModThawArray, FlocModCapsEnd, EndFlocModConPipe, FlocModShortAndEndPipes, ThawFlocMod1Components, ArrayTankModules, MirrorTankModules, FrzFlocModComponents) if N_FlocChannelBafflesShort[0] < 2 and N_FlocChannels == 2 and (N_SedBays ≠ 1 or N_SedTanks ≠ 1)
    stack(FlocMod1CapLayer, FlocModLargeCapUpper, FlocModLargeCapMiddle, FlocModLargeCapLower, FlocModFittedCapUpper, FlocModFittedCapMiddle, FlocModFittedCapLower, FlocMod1CapFrz, FlocMod1CouplingLayer, FlocModCouplingUpper, FlocModCouplingMiddle, FlocModCouplingLower, FlocMod1CouplingFrz, FlocMod1PipeLayer, FlocModLongPipeUpper, FlocModLongPipeMiddle, FlocModLongPipeLower, FlocMod1PipeFrz, FlocModConnectPipeLayer, FlocModConnectorPipeUpper, FlocModConnectorPipeMiddle, FlocModConnectorPipeLower, FlocModConnectPipeFrz, FlocMod1SpacerNO, FlocModThawArray, FlocShortBaffleSpacers1, FlocMod1SpacerFrz, FlocModCapsEnd, FlocModCouplingsEnd, EndFlocModConPipe, FlocModShortAndEndPipes, ThawFlocMod1Components, FrzFlocModComponents) otherwise
# Module Piping for Last Channel (non-overlapping)
# NO for nonoverlapping
LargeCapLastNO_Origin := [
    Floc_Origin[0] + X_FlocBaffles[N_FlocChannelBaffles[last(N_FlocChannelBaffles)] - 1, cols(X_FlocBaffles) - 1] + CapThickness(ND_FlocModulesLarge) - L_Sed;
    Floc_Origin[1] - 2*S_Fitting + W_FlocChannel;
    Floc_Origin[2] + L_FlocBaffleLower - 0.5*(L_FlocBaffleLower + L_FlocBaffleUpper - (H_Floc - 0.5*H_PlantFreeboard))
]
FittedCapLastNO_Origin := [-T_FlocBaffle - CapThickness(ND_FlocModulesLarge) - CapThickness(ND_FlocModulesMain); 0 m; 0 m] + LargeCapLastNO_Origin
FlocModCouplingLastNO_Origin := FittedCapLastNO_Origin + [-L_FlocModuleLong[last(L_FlocModuleLong)]; 0 m; 0 m]
ConnectorPipeLastNO_Origin := FlocModCouplingLastNO_Origin + [-CouplingLength(ND_FlocModulesMain) + 2*SocketDepth(ND_FlocModulesMain); 0 m; 0 m]
# FrzFlocModComponents
# SelectFlocModPipeCap
FlocModLargeCapLastUpper := CapF([
    LargeCapLastNO_Origin[0] - B_FlocBaffle[last(B_FlocBaffle)];
    LargeCapLastNO_Origin[1];
    Floc_Origin[2] + H_Floc - 0.5*H_PlantFreeboard - S_Fitting - ConRadius(ND_FlocModulesLarge)
], [180; 0]*deg, ND_FlocModulesLarge)
FlocModLargeCapLastMiddle := CapF(LargeCapLastNO_Origin, [180; 0]*deg, ND_FlocModulesLarge)
FlocModLargeCapLastLower := CapF([
    LargeCapLastNO_Origin[0];
    LargeCapLastNO_Origin[1];
    Floc_Origin[2] + S_Fitting + L_BafflePort + ConRadius(ND_FlocModulesLarge)
], [180; 0]*deg, ND_FlocModulesLarge)
FlocModFittedCapLastUpper := CapF([
    FittedCapLastNO_Origin[0] - B_FlocBaffle[last(B_FlocBaffle)];
    FittedCapLastNO_Origin[1];
    Floc_Origin[2] + H_Floc - 0.5*H_PlantFreeboard - S_Fitting - ConRadius(ND_FlocModulesLarge)
], [0; 0]*deg, ND_FlocModulesMain)
FlocModFittedCapLastMiddle := CapF(FittedCapLastNO_Origin, [0; 0]*deg, ND_FlocModulesMain)
FlocModFittedCapLastLower := CapF([
    FittedCapLastNO_Origin[0];
    FittedCapLastNO_Origin[1];
    Floc_Origin[2] + S_Fitting + L_BafflePort + ConRadius(ND_FlocModulesLarge)
], [0; 0]*deg, ND_FlocModulesMain)
# array after every time a cap is drawn
ArrayFlocModXCapL := ArrayLast(1, N_FlocChannelModulesLong[last(N_FlocChannelModulesLong)] + 1*(N_FlocChannelBafflesShort[last(N_FlocChannelBafflesShort)] > 0), -(B_FlocBaffle[last(B_FlocBaffle)]*N_FlocChannelBafflesLong[last(N_FlocChannelBafflesLong)]))
# FlocModCapFrz
FlocMod1CouplingSelect := SelectLayer("FlocModCouplingPlu")
FlocModCouplingLastUpper := CouplingF([
    FittedCapLastNO_Origin[0] - L_FlocModuleLongOuter[last(L_FlocModuleLong)] - B_FlocBaffle[last(B_FlocBaffle)];
    FlocModCouplingLastNO_Origin[1];
    Floc_Origin[2] + H_Floc - 0.5*H_PlantFreeboard - S_Fitting - ConRadius(ND_FlocModulesLarge)
], [0; 0]*deg, ND_FlocModulesMain, PS_Modules)
FlocModCouplingLastMiddle := CouplingF(FlocModCouplingLastNO_Origin, [0; 0]*deg, ND_FlocModulesMain, PS_Modules)
FlocModCouplingLastLower := CouplingF([
    FittedCapLastNO_Origin[0] - L_FlocModuleLongOuter[last(L_FlocModuleLong)];
    FlocModCouplingLastNO_Origin[1];
    Floc_Origin[2] + S_Fitting + L_BafflePort + ConRadius(ND_FlocModulesLarge)
], [0; 0]*deg, ND_FlocModulesMain, PS_Modules)
ArrayFlocModXConnectL := ArrayLast(1, N_FlocChannelModulesLong[last(N_FlocChannelModulesLong)] - 1, -(B_FlocBaffle[last(B_FlocBaffle)]*N_FlocChannelBafflesLong[last(N_FlocChannelBafflesLong)]))
ArrayFlocModXLastNO := ArrayLast(1, N_FlocChannelModulesLong[last(N_FlocChannelModulesLong)], -(B_FlocBaffle[last(B_FlocBaffle)]*N_FlocChannelBafflesLong[last(N_FlocChannelBafflesLong)]))
FlocMod1CouplingFrz := FreezeLayer("FlocModCouplingPlu")  # must freeze this layer to ensure it gets grouped
FlocModCouplingsLast := stack(FlocMod1CouplingSelect, FlocModCouplingLastUpper, ArrayFlocModXLastNO, FlocModCouplingLastMiddle, ArrayFlocModXLastNO, FlocModCouplingLastLower, ArrayFlocModXLastNO, FlocMod1CouplingFrz)
FlocMod1PipeSelect := SelectLayer("FlocModPipePlu")
FlocModLongPipeLastUpper := PipeF([
    FittedCapLastNO_Origin[0] - B_FlocBaffle[last(B_FlocBaffle)];
    FittedCapLastNO_Origin[1];
    Floc_Origin[2] + H_Floc - 0.5*H_PlantFreeboard - S_Fitting - ConRadius(ND_FlocModulesLarge)
], L_FlocModuleLongOuter[last(L_FlocModuleLongOuter)], [0; 0]*deg, ND_FlocModulesMain, PS_Modules)
FlocModLongPipeLastMiddle := PipeF(FittedCapLastNO_Origin, L_FlocModuleLong[last(L_FlocModuleLong)], [0; 0]*deg, ND_FlocModulesMain, PS_Modules)
FlocModLongPipeLastLower := PipeF([
    FittedCapLastNO_Origin[0];
    FittedCapLastNO_Origin[1];
    Floc_Origin[2] + S_Fitting + L_BafflePort + ConRadius(ND_FlocModulesLarge)
], L_FlocModuleLongOuter[last(L_FlocModuleLongOuter)], [0; 0]*deg, ND_FlocModulesMain, PS_Modules)
EndFlocModLongPipeLastUpper := PipeF([
    {
        (Floc_Origin[0] - L_Sed + X_FlocBaffles[0, cols(X_FlocBaffles) - 1] - CapThickness(ND_FlocModulesMain) - T_FlocBaffle) if N_FlocChannelBafflesShort[N_FlocChannels - 1] == 2
        (Floc_Origin[0] - L_Sed + X_FlocBaffles[0, cols(X_FlocBaffles) - 1] + SocketDepth(ND_FlocModulesMain) - CouplingLength(ND_FlocModulesMain)) otherwise
    };
    FittedCapLastNO_Origin[1];
    Floc_Origin[2] + H_Floc - 0.5*H_PlantFreeboard - S_Fitting - ConRadius(ND_FlocModulesLarge)
], {
    (X_FlocBaffles[0, cols(X_FlocBaffles) - 1] - CapThickness(ND_FlocModulesMain) - T_FlocBaffle) if N_FlocChannelBafflesShort[N_FlocChannels - 1] == 2
    (X_FlocBaffles[0, cols(X_FlocBaffles) - 1] + SocketDepth(ND_FlocModulesMain) - CouplingLength(ND_FlocModulesMain) - T_FlocBaffle) otherwise
}, [0; 0]*deg, ND_FlocModulesMain, PS_Modules)
EndFlocModLongPipeLastMiddle := PipeF([
    Floc_Origin[0] - L_Sed + X_FlocBaffles[0, cols(X_FlocBaffles) - 1] - T_FlocBaffle + SocketDepth(ND_FlocModulesMain) - CouplingLength(ND_FlocModulesMain);
    FittedCapLastNO_Origin[1];
    FittedCapLastNO_Origin[2]
], X_FlocBaffles[0, cols(X_FlocBaffles) - 1] + SocketDepth(ND_FlocModulesMain) - CouplingLength(ND_FlocModulesMain) - T_FlocBaffle, [0; 0]*deg, ND_FlocModulesMain, PS_Modules)
EndFlocModLongPipeLastLower := PipeF([
    {
        (Floc_Origin[0] - L_Sed + X_FlocBaffles[1, cols(X_FlocBaffles) - 1] - CapThickness(ND_FlocModulesMain) - T_FlocBaffle) if N_FlocChannelBafflesShort[N_FlocChannels - 1] == 2
        (Floc_Origin[0] - L_Sed + X_FlocBaffles[1, cols(X_FlocBaffles) - 1] + SocketDepth(ND_FlocModulesMain) - CouplingLength(ND_FlocModulesMain) - T_FlocBaffle) otherwise
    };
    FittedCapLastNO_Origin[1];
    Floc_Origin[2] + S_Fitting + L_BafflePort + ConRadius(ND_FlocModulesLarge)
], {
    (X_FlocBaffles[1, cols(X_FlocBaffles) - 1] - CapThickness(ND_FlocModulesMain) - T_FlocBaffle) if N_FlocChannelBafflesShort[N_FlocChannels - 1] == 2
    (X_FlocBaffles[1, cols(X_FlocBaffles) - 1] + SocketDepth(ND_FlocModulesMain) - CouplingLength(ND_FlocModulesMain) - T_FlocBaffle) otherwise
}, [0; 0]*deg, ND_FlocModulesMain, PS_Modules)
FlocModLastShortPipeUpper := PipeF([
    {
        (Floc_Origin[0] - L_Sed + X_FlocBaffles[N_FlocChannelBafflesShort[N_FlocChannels - 1] - 2, cols(X_FlocBaffles) - 1] - CapThickness(ND_FlocModulesMain) - T_FlocBaffle) if N_FlocChannelBafflesShort[N_FlocChannels - 1] - 2 ≥ 0
        0 otherwise
    };
    FittedCapLastNO_Origin[1];
    Floc_Origin[2] + H_Floc - 0.5*H_PlantFreeboard - S_Fitting - ConRadius(ND_FlocModulesLarge)
], (N_FlocChannelBafflesShort[N_FlocChannels - 1] - 2)*B_FlocBaffle[last(S_FlocBaffle)] + (SocketDepth(ND_FlocModulesMain) - CapThickness(ND_FlocModulesMain)), [0; 0]*deg, ND_FlocModulesMain, PS_Modules)
FlocModLastShortPipeMiddle := PipeF([
    {
        (Floc_Origin[0] - L_Sed + X_FlocBaffles[N_FlocChannelBafflesShort[N_FlocChannels - 1] - 1, cols(X_FlocBaffles) - 1] - CapThickness(ND_FlocModulesMain) - T_FlocBaffle) if N_FlocChannelBafflesShort[N_FlocChannels - 1] - 1 ≥ 0
        0 otherwise
    };
    FittedCapLastNO_Origin[1];
    FittedCapLastNO_Origin[2]
], (N_FlocChannelBafflesShort[N_FlocChannels - 1] - 1)*B_FlocBaffle[last(S_FlocBaffle)] + SocketDepth(ND_FlocModulesMain) - CapThickness(ND_FlocModulesMain), [0; 0]*deg, ND_FlocModulesMain, PS_Modules)
FlocModLastShortPipeLower := PipeF([
    {
        (Floc_Origin[0] - L_Sed + X_FlocBaffles[N_FlocChannelBafflesShort[N_FlocChannels - 1] - 1, cols(X_FlocBaffles) - 1] - CapThickness(ND_FlocModulesMain) - T_FlocBaffle) if N_FlocChannelBafflesShort[N_FlocChannels - 1] - 1 ≥ 0
        0 otherwise
    };
    FittedCapLastNO_Origin[1];
    Floc_Origin[2] + S_Fitting + L_BafflePort + ConRadius(ND_FlocModulesLarge)
], (N_FlocChannelBafflesShort[N_FlocChannels - 1] - 1)*B_FlocBaffle[last(S_FlocBaffle)] + (SocketDepth(ND_FlocModulesMain) - CapThickness(ND_FlocModulesMain)), [0; 0]*deg, ND_FlocModulesMain, PS_Modules)
# FlocMod1LongPipeFrz
FlocModLastEndPipes :=
    stack(FlocMod1PipeSelect, FlocModLongPipeLastUpper, ArrayFlocModXLastNO, FlocModLongPipeLastMiddle, ArrayFlocModXLastNO, FlocModLongPipeLastLower, ArrayFlocModXLastNO, EndFlocModLongPipeLastUpper, EndFlocModLongPipeLastMiddle, EndFlocModLongPipeLastLower, FlocMod1PipeFrz) if N_FlocChannelBafflesShort[N_FlocChannels - 1] == 0
    stack(FlocMod1PipeSelect, FlocModLongPipeLastUpper, ArrayFlocModXLastNO, FlocModLongPipeLastMiddle, ArrayFlocModXLastNO, FlocModLongPipeLastLower, ArrayFlocModXLastNO, EndFlocModLongPipeLastUpper, EndFlocModLongPipeLastMiddle, EndFlocModLongPipeLastLower, FlocModLastShortPipeMiddle, FlocMod1PipeFrz) if N_FlocChannelBafflesShort[N_FlocChannels - 1] == 2
    stack(FlocMod1PipeSelect, FlocModLongPipeLastUpper, ArrayFlocModXLastNO, FlocModLongPipeLastMiddle, ArrayFlocModXLastNO, FlocModLongPipeLastLower, ArrayFlocModXLastNO, EndFlocModLongPipeLastUpper, EndFlocModLongPipeLastMiddle, EndFlocModLongPipeLastLower, FlocModLastShortPipeUpper, FlocModLastShortPipeMiddle, FlocModLastShortPipeLower, FlocMod1PipeFrz) otherwise
FlocModConnectPipeSelect := SelectLayer("FlocModConnectPipePlu")
FlocModConnectorPipeLastUpper := PipeF([
    ConnectorPipeLastNO_Origin[0];
    ConnectorPipeLastNO_Origin[1];
    Floc_Origin[2] + H_Floc - 0.5*H_PlantFreeboard - S_Fitting - ConRadius(ND_FlocModulesLarge)
], L_FlocModuleConnectorOuter[last(L_FlocModuleConnectorOuter)], [0; 0]*deg, ND_FlocModulesMain, PS_Modules)
FlocModConnectorPipeLastMiddle := PipeF(ConnectorPipeLastNO_Origin, L_FlocModuleConnector[last(L_FlocModuleConnector)], [0; 0]*deg, ND_FlocModulesMain, PS_Modules)
FlocModConnectorPipeLastLower := PipeF([
    ConnectorPipeLastNO_Origin[0] + B_FlocBaffle[last(B_FlocBaffle)];
    ConnectorPipeLastNO_Origin[1];
    Floc_Origin[2] + S_Fitting + L_BafflePort + ConRadius(ND_FlocModulesLarge)
], L_FlocModuleConnectorOuter[last(L_FlocModuleConnectorOuter)], [0; 0]*deg, ND_FlocModulesMain, PS_Modules)
# FlocModConnectPipeFrz
LastFlocModShortPipe :=
    if N_FlocChannelBafflesShort[last(N_FlocChannelBafflesShort)] ≠ 0
        PipeF([
            (Plant_Origin[0] - X_FlocBaffles[N_FlocChannelBafflesLong[last(N_FlocChannelBafflesLong)]*N_FlocChannelModulesLong[last(N_FlocChannelModulesLong)], N_FlocChannels - 1]) - CapThickness(ND_FlocModulesMain) - T_FlocBaffle;
            ConnectorPipeLastNO_Origin[1];
            ConnectorPipeLastNO_Origin[2]
        ], L_FlocModuleShort[last(L_FlocModuleShort)], [0; 0]*deg, ND_FlocModulesMain, PS_Modules)
    "0" otherwise
FlocModEndPipeLast := PipeF([
    Floc_Origin[0] - X_FlocBaffles[N_FlocChannelBaffles[last(N_FlocChannelBaffles)] - 1, N_FlocChannels - 1] - T_FlocBaffle - CouplingLength(ND_FlocModulesMain) + SocketDepth(ND_FlocModulesMain);
    FittedCapLastNO_Origin[1];
    FittedCapLastNO_Origin[1]
], L_Sed - X_FlocBaffles[N_FlocChannelBaffles[last(N_FlocChannelBaffles)] - 1, N_FlocChannels - 1] - CouplingLength(ND_FlocModulesMain) + SocketDepth(ND_FlocModulesMain) - T_FlocBaffle, [0; 0]*deg, ND_FlocModulesMain, PS_Modules)
# FlocModPipeFrz
FlocModSpacerPipeLastMiddle :=
    Local ← stack(SelectLayer("FlocModSpacerPlu"), PipeF([
        CapThickness(ND_FlocModulesMain) - CapHeight(ND_FlocModulesMain) + FittedCapLastNO_Origin[0];
        FittedCapLastNO_Origin[1];
        ConnectorPipeLastNO_Origin[2]
    ], S_FlocBaffle[N_FlocChannels - 1] - CapHeight(ND_FlocModulesMain), [0; 0]*deg, ND_SpacerPipe, PS_Modules), ArrayFlocModXLastNO)
    for i ∈ 0 .. N_FlocChannelBafflesLong[N_FlocChannels - 1] - 3
        Local ← stack(Local, PipeF([
            CapThickness(ND_FlocModulesMain) - B_FlocBaffle[N_FlocChannels - 1]*(i + 1) + FittedCapLastNO_Origin[0];
            FittedCapLastNO_Origin[1];
            ConnectorPipeLastNO_Origin[2]
        ], S_FlocBaffle[N_FlocChannels - 1], [0; 0]*deg, ND_SpacerPipe, PS_Modules), ArrayFlocModXLastNO)
    Local
FlocModSpacerUpperLast :=
    Local ← stack(PipeF([
        Plant_Origin[0] + X_FlocBaffles[N_FlocChannelBaffles[last(N_FlocChannelBaffles)] - 2, N_FlocChannels - 1] - L_Sed - CapHeight(ND_FlocModulesMain) - T_FlocBaffle;
        FittedCapLastNO_Origin[1];
        Floc_Origin[2] + H_Floc - 0.5*H_PlantFreeboard - S_Fitting - ConRadius(ND_FlocModulesLarge)
    ], 2*S_FlocBaffle[0] - CapHeight(ND_FlocModulesMain) + T_FlocBaffle, [0; 0]*deg, ND_SpacerPipe, PS_Modules), ArrayFlocModXLastNO)
    if N_FlocChannelBafflesLong[N_FlocChannels - 1] > 5
        for i ∈ 1 .. N_FlocChannelBafflesLong[N_FlocChannels - 1]/2 - 2
            Local ← stack(Local, PipeF([
                Plant_Origin[0] + X_FlocBaffles[N_FlocChannelBaffles[last(N_FlocChannelBaffles)] - 2, N_FlocChannels - 1] - T_FlocBaffle - L_Sed - 2*B_FlocBaffle[last(B_FlocBaffle)]*i;
                FittedCapLastNO_Origin[1];
                Floc_Origin[2] + H_Floc - 0.5*H_PlantFreeboard - S_Fitting - ConRadius(ND_FlocModulesLarge)
            ], 2*S_FlocBaffle[0] + T_FlocBaffle, [0; 0]*deg, ND_SpacerPipe, PS_Modules), ArrayFlocModXLastNO)
    Local
FlocModSpacerLowerLast :=
    Local ← stack(PipeF([
        Plant_Origin[0] - T_FlocBaffle + X_FlocBaffles[N_FlocChannelBaffles[last(N_FlocChannelBaffles)] - 1, N_FlocChannels - 1] - L_Sed - CapHeight(ND_FlocModulesMain);
        FittedCapLastNO_Origin[1];
        Floc_Origin[2] + S_Fitting + L_BafflePort + ConRadius(ND_FlocModulesLarge)
    ], 2*S_FlocBaffle[0] - CapHeight(ND_FlocModulesMain) + T_FlocBaffle, [0; 0]*deg, ND_SpacerPipe, PS_Modules), ArrayFlocModXLastNO)
    if N_FlocChannelBafflesLong[N_FlocChannels - 1] > 5
        for i ∈ 1 .. N_FlocChannelBafflesLong[N_FlocChannels - 1]/2 - 2
            Local ← stack(Local, PipeF([
                Plant_Origin[0] + X_FlocBaffles[N_FlocChannelBaffles[last(N_FlocChannelBaffles)] - 1, N_FlocChannels - 1] - L_Sed - 2*i*B_FlocBaffle[last(B_FlocBaffle)];
                FittedCapLastNO_Origin[1];
                Floc_Origin[2] + S_Fitting + L_BafflePort + ConRadius(ND_FlocModulesLarge)
            ], 2*S_FlocBaffle[0] + T_FlocBaffle, [0; 0]*deg, ND_SpacerPipe, PS_Modules), ArrayFlocModXLastNO)
    Local
FlocModSpacerPipeLastShortMiddle1 :=
    if N_FlocChannelBafflesShort[last(N_FlocChannelBafflesShort)] ≠ 0
        PipeF([
            Plant_Origin[0] - T_FlocBaffle - L_Sed + X_FlocBaffles[N_FlocChannelBafflesShort[last(N_FlocChannelBafflesShort)] - 1, N_FlocChannels - 1] - CapHeight(ND_FlocModulesMain);
            FittedCapLastNO_Origin[1];
            ConnectorPipeLastNO_Origin[2]
        ], S_FlocBaffle[N_FlocChannels - 1] - CapHeight(ND_FlocModulesMain), [0; 0]*deg, ND_SpacerPipe, PS_Modules)
    "0" otherwise
FlocModSpacerPipeLastShortMiddle2 :=
    if N_FlocChannelBafflesShort[last(N_FlocChannelBafflesShort)] ≥ 2
        PipeF([
            Plant_Origin[0] - T_FlocBaffle - L_Sed + X_FlocBaffles[N_FlocChannelBafflesShort[last(N_FlocChannelBafflesShort)] - 2, N_FlocChannels - 1] - CapHeight(ND_FlocModulesMain);
            FittedCapLastNO_Origin[1];
            ConnectorPipeLastNO_Origin[2]
        ], S_FlocBaffle[N_FlocChannels - 1], [0; 0]*deg, ND_SpacerPipe, PS_Modules)
    "0" otherwise
ArrayModSpacerShortLast := ArrayLast(1, N_FlocChannelBafflesShort[last(N_FlocChannelBafflesShort)] - 2, -B_FlocBaffle[last(B_FlocBaffle)])
FlocModSpacerPipeLastShortUpper1 :=
    if N_FlocChannelBafflesShort[last(N_FlocChannelBafflesShort)] ≥ 2
        PipeF([
            Plant_Origin[0] - T_FlocBaffle - L_Sed + X_FlocBaffles[N_FlocChannelBafflesShort[last(N_FlocChannelBafflesShort)] - 2, N_FlocChannels - 1] - CapHeight(ND_FlocModulesMain);
            FittedCapLastNO_Origin[1];
            ConnectorPipeLastNO_Origin[2]
        ], S_FlocBaffle[N_FlocChannels - 1] - CapHeight(ND_FlocModulesMain), [0; 0]*deg, ND_SpacerPipe, PS_Modules)
    "0" otherwise
FlocModSpacerPipeLastShortUpper2 :=
    if N_FlocChannelBafflesShort[last(N_FlocChannelBafflesShort)] ≥ 3
        PipeF([
            Plant_Origin[0] - T_FlocBaffle - L_Sed + X_FlocBaffles[N_FlocChannelBafflesShort[last(N_FlocChannelBafflesShort)] - 3, N_FlocChannels - 1] - CapHeight(ND_FlocModulesMain);
            FittedCapLastNO_Origin[1];
            ConnectorPipeLastNO_Origin[2]
        ], S_FlocBaffle[N_FlocChannels - 1], [0; 0]*deg, ND_SpacerPipe, PS_Modules)
    "0" otherwise
FlocModSpacerPipeLastShortLower1 :=
    if N_FlocChannelBafflesShort[last(N_FlocChannelBafflesShort)] ≠ 0
        PipeF([
            Plant_Origin[0] - T_FlocBaffle - L_Sed + X_FlocBaffles[N_FlocChannelBafflesShort[last(N_FlocChannelBafflesShort)] - 1, N_FlocChannels - 1] - CapHeight(ND_FlocModulesMain);
            FittedCapLastNO_Origin[1];
            ConnectorPipeLastNO_Origin[2]
        ], S_FlocBaffle[N_FlocChannels - 1] - CapHeight(ND_FlocModulesMain), [0; 0]*deg, ND_SpacerPipe, PS_Modules)
    "0" otherwise
FlocModSpacerPipeLastShortLower2 :=
    if N_FlocChannelBafflesShort[last(N_FlocChannelBafflesShort)] ≥ 2
        PipeF([
            Plant_Origin[0] - T_FlocBaffle - L_Sed + X_FlocBaffles[N_FlocChannelBafflesShort[last(N_FlocChannelBafflesShort)] - 2, N_FlocChannels - 1] - CapHeight(ND_FlocModulesMain);
            FittedCapLastNO_Origin[1];
            ConnectorPipeLastNO_Origin[2]
        ], S_FlocBaffle[N_FlocChannels - 1], [0; 0]*deg, ND_SpacerPipe, PS_Modules)
    "0" otherwise
ArrayModSpacerShortLastOuter := ArrayLast(1, (N_FlocChannelBafflesShort[last(N_FlocChannelBafflesShort)] - 2)/2, -2*B_FlocBaffle[last(B_FlocBaffle)])
FlocMod1SpacerNOLast :=
    stack(FlocModSpacerPipeLastMiddle, FlocModSpacerUpperLast, FlocModSpacerLowerLast, FlocMod1SpacerFrz) if N_FlocChannelBafflesShort[last(N_FlocChannelBafflesShort)] == 0
    stack(FlocModSpacerPipeLastMiddle, FlocModSpacerUpperLast, FlocModSpacerLowerLast, FlocModSpacerPipeLastShortMiddle1, FlocMod1SpacerFrz) if N_FlocChannelBafflesShort[last(N_FlocChannelBafflesShort)] == 2
    stack(FlocModSpacerPipeLastMiddle, FlocModSpacerUpperLast, FlocModSpacerLowerLast, FlocModSpacerPipeLastShortMiddle1, FlocModSpacerPipeLastShortMiddle2, ArrayModSpacerShortLast, FlocMod1SpacerFrz) if N_FlocChannelBafflesShort[last(N_FlocChannelBafflesShort)] == 4
    stack(FlocModSpacerPipeLastMiddle, FlocModSpacerUpperLast, FlocModSpacerLowerLast, FlocModSpacerPipeLastShortMiddle1, FlocModSpacerPipeLastShortMiddle2, ArrayModSpacerShortLast, FlocModSpacerPipeLastShortUpper1, FlocModSpacerPipeLastShortLower1, FlocMod1SpacerFrz) if N_FlocChannelBafflesShort[last(N_FlocChannelBafflesShort)] == 6
    stack(FlocModSpacerPipeLastMiddle, FlocModSpacerUpperLast, FlocModSpacerLowerLast, FlocModSpacerPipeLastShortMiddle1, FlocModSpacerPipeLastShortMiddle2, ArrayModSpacerShortLast, FlocModSpacerPipeLastShortUpper1, ArrayModSpacerShortLastOuter, FlocModSpacerPipeLastShortLower1, ArrayModSpacerShortLastOuter, FlocMod1SpacerFrz) otherwise
# SelectFlocModCoupling
FlocModCouplingLastEndUpper := CouplingF([
    Floc_Origin[0] - L_Sed + X_FlocBaffles[0, N_FlocChannels - 1] - SocketDepth(ND_FlocModulesMain) - T_FlocBaffle;
    FittedCapLastNO_Origin[1];
    Floc_Origin[2] + H_Floc - 0.5*H_PlantFreeboard - S_Fitting - ConRadius(ND_FlocModulesLarge)
], [0; 0]*deg, ND_FlocModulesMain, PS_Modules)
FlocModCouplingLastEndMiddle := CouplingF([
    Floc_Origin[0] - L_Sed + X_FlocBaffles[0, N_FlocChannels - 1] - SocketDepth(ND_FlocModulesMain) - T_FlocBaffle;
    FittedCapLastNO_Origin[1];
    ConnectorPipeLastNO_Origin[2]
], [0; 0]*deg, ND_FlocModulesMain, PS_Modules)
FlocModCouplingLastEndLower := CouplingF([
    Floc_Origin[0] - L_Sed + X_FlocBaffles[1, N_FlocChannels - 1] - SocketDepth(ND_FlocModulesMain) - T_FlocBaffle;
    FittedCapLastNO_Origin[1];
    Floc_Origin[2] + S_Fitting + L_BafflePort + ConRadius(ND_FlocModulesLarge)
], [0; 0]*deg, ND_FlocModulesMain, PS_Modules)
# FlocModCouplingFrz
EndLastModCouplings :=
    stack(SelectFlocMod1Coupling, FlocModCouplingLastEndMiddle, FlocMod1CouplingFrz) if N_FlocChannelBafflesShort[last(N_FlocChannelBafflesShort)] == 2
    stack(SelectFlocMod1Coupling, FlocModCouplingLastEndUpper, FlocModCouplingLastEndMiddle, FlocModCouplingLastEndLower, FlocMod1CouplingFrz) otherwise
FlocModSpacerShortLast :=
    stack(SelectFlocMod1Spacer, FlocModSpacerPipeLastShort1, FlocMod1SpacerFrz) if N_FlocChannelBafflesShort[last(N_FlocChannelBafflesShort)] == 2
    stack(SelectFlocMod1Spacer, FlocModSpacerPipeLastShort1, FlocModSpacerPipeLastShort2, ArrayModSpacerShortLast, FlocMod1SpacerFrz) otherwise
FlocModLastNO :=
    stack(SelectFlocMod1PipeCap, FlocModLargeCapLastUpper, ArrayFlocModXCapL, FlocModLargeCapLastMiddle, ArrayFlocModXCapL, FlocModLargeCapLastLower, ArrayFlocModXCapL, FlocModFittedCapLastUpper, ArrayFlocModXCapL, FlocModFittedCapLastMiddle, ArrayFlocModXCapL, FlocModFittedCapLastLower, ArrayFlocModXCapL, FlocMod1CapFrz, FlocMod1SpacerNOLast, FlocModCouplingsLast, FlocModLastEndPipes, FlocModConnectPipeSelect, FlocModConnectorPipeLastUpper, ArrayFlocModXConnectL, FlocModConnectorPipeLastMiddle, ArrayFlocModXConnectL, FlocModConnectorPipeLastLower, ArrayFlocModXConnectL, FlocModConnectPipeFrz) if N_FlocChannelBafflesShort[last(N_FlocChannelBafflesShort)] == 0
    stack(SelectFlocMod1PipeCap, FlocModLargeCapLastUpper, ArrayFlocModXCapL, FlocModLargeCapLastMiddle, ArrayFlocModXCapL, FlocModLargeCapLastLower, ArrayFlocModXCapL, FlocModFittedCapLastUpper, ArrayFlocModXCapL, FlocModFittedCapLastMiddle, ArrayFlocModXCapL, FlocModFittedCapLastLower, ArrayFlocModXCapL, FlocMod1CapFrz, FlocMod1SpacerNOLast, FlocModCouplingsLast, FlocModLastEndPipes, FlocModConnectPipeSelect, FlocModConnectorPipeLastUpper, ArrayFlocModXLastNO, FlocModConnectorPipeLastMiddle, ArrayFlocModXLastNO, FlocModConnectorPipeLastLower, ArrayFlocModXLastNO, FlocModConnectPipeFrz, EndLastModCouplings) otherwise
ThawAllFlocModules := ThawMultiple(["FlocMod*Plu"])
# ArrayModulesY array new pipes to within 0.05m of each wall.
# ArrayFlocModY
FlocModulesNonOverlapping :=
    FlocMod1NoOverlap if N_SedTanks == 1 and N_SedBays == 1
    stack(FlocMod1NoOverlap, FlocModLastNO, ThawAllFlocModules, ArrayFlocModY, FrzFlocModComponents)
# Module Piping for Low Flow
# FlocModCapLayer
FlocModCapLayer := layer_new("FlocModCapPlu", red)
FlocModCap :=
    Script ← FlocModCapLayer
    for i ∈ 0 .. N_Obstacles - 1
        large ← CapF(SpacerCap_Origin + [0; 0; -i*(S_Obstacle + outerdiameter(ND_SpacerPipe))], [0; 0]*deg, ND_SpacerPipe)
        fitted ← CapF(FittedCapLF_Origin + [0; 0; -i*(S_Obstacle + outerdiameter(ND_SpacerPipe))], [0; 0]*deg, ND_FlocModulesMain)
        Script ← stack(Script, large, fitted)
    return Script
MirrorFlocModCap := Mirror3dAll("yz", [-L_Floc/2; FittedCapLF_Origin[2]], "n")
FlocMod1CapFrz := FreezeLayer("FlocModCapPlu")
FlocModCapsScript := stack(FlocModCapLayer, FlocModCap, MirrorFlocModCap, FlocMod1CapFrz)
# FlocModPipeLayer
FlocModPipeLayer := layer_new("FlocModPipePlu", blue)
FlocModLongPipe :=
    Script ← FlocModPipeLayer
    for i ∈ 0 .. N_Obstacles - 1
        x ← PipeF(FittedCapLF_Origin + [0; 0; -i*(S_Obstacle + outerdiameter(ND_SpacerPipe))], L_Floc - 2*(CapThickness(ND_FlocModulesMain) + CapThickness(ND_SpacerPipe)), [0; 0]*deg, ND_FlocModulesMain, PS_Modules)
        Script ← stack(Script, x)
    return Script
FlocModPipeFrz := FreezeLayer("FlocModPipePlu")
FlocModPipeScript := stack(FlocModPipeLayer, FlocModLongPipe, FlocModPipeFrz)
# FlocModSpacerLayer
FlocModSpacerLayer := layer_new("FlocModSpacerPlu", blue)
FlocModSpacer :=
    Script ← FlocModSpacerLayer
    for i ∈ 0 .. N_Obstacles - 1
        first ← PipeF(SpacerCap_Origin - [
            L_Floc - CapThickness(ND_SpacerPipe) - S_FlocBaffle[0];
            0;
            i*(S_Obstacle + outerdiameter(ND_SpacerPipe))
        ], S_FlocBaffle[0] - CapThickness(ND_SpacerPipe), [0; 0]*deg, ND_SpacerPipe, PS_Modules)
        last ← PipeF(SpacerCap_Origin - [0; 0; i*(S_Obstacle + outerdiameter(ND_SpacerPipe))], L_Floc - (L_Floc/S_FlocBaffle[0] - 1)*B_FlocBaffle[0] - CapThickness(ND_SpacerPipe), [0; 0]*deg, ND_SpacerPipe, PS_Modules)
        mid ← PipeF(SpacerCap_Origin - [
            L_Floc - (L_Floc/S_FlocBaffle[0] - 1)*B_FlocBaffle[0] - CapThickness(ND_SpacerPipe) + T_FlocBaffle;
            0;
            i*(S_Obstacle + outerdiameter(ND_SpacerPipe))
        ], S_FlocBaffle[0], [0; 0]*deg, ND_SpacerPipe, PS_Modules)
        midarray ← ArrayLast(1, L_Floc/S_FlocBaffle[0] - 2, (-B_FlocBaffle)[0])
        Script ← stack(Script, first, last, mid, midarray)
    return Script
FlocModSpacerFrz := FreezeLayer("FlocModSpacerPlu")
FlocModSpacerScript := stack(FlocModSpacerLayer, FlocModSpacer, FlocModSpacerFrz)
ThawCapPipe := ThawMultiple(["FlocModCapPlu"; "FlocModPipePlu"])
ArrayCapPipe := array_all(N_FlocChannels, 1, -(W_FlocChannel + T_FlocChannelWall))
FrzCapPipe := FreezeMultiple(["FlocModCapPlu"; "FlocModPipePlu"])
ThawSpacer := SelectLayer("FlocModSpacerPlu")
B_FlocBaffle[0] - CapThickness(ND_SpacerPipe) = 0.13065 m
ArraySpacer := ArrayLast(N_FlocChannels - 1, 1, -(W_FlocChannel + T_FlocChannelWall))
B_FlocBaffle[0] = 0.137 m
FrzSpacer := FreezeLayer("FlocModSpacerPlu")
FlocModSpacerLast :=
    Script ← FlocModSpacerLayer
    for i ∈ 0 .. N_Obstacles - 1
        first ← PipeF(SpacerCapLast_Origin - [0; 0; i*(S_Obstacle + outerdiameter(ND_SpacerPipe))], B_FlocBaffle[0] - CapThickness(ND_SpacerPipe), [0; 0]*deg, ND_SpacerPipe, PS_Modules)
        mid ← PipeF(SpacerCapLast_Origin - [
            B_FlocBaffle[0] - CapThickness(ND_SpacerPipe) + T_FlocBaffle;
            0;
            i*(S_Obstacle + outerdiameter(ND_SpacerPipe))
        ], S_FlocBaffle[0], [0; 0]*deg, ND_SpacerPipe, PS_Modules)
        arraymid ← ArrayLast(1, L_Floc/S_FlocBaffle[0] - 3, (-B_FlocBaffle)[0])
        last ← PipeF(SpacerCapLast_Origin - [
            2*B_FlocBaffle[0] - CapThickness(ND_SpacerPipe) + T_FlocBaffle;
            0;
            i*(S_Obstacle + outerdiameter(ND_SpacerPipe))
        ], (2*S_FlocBaffle)[0] - 2*CapThickness(ND_SpacerPipe), [0; 0]*deg, ND_SpacerPipe, PS_Modules)
        Script ← stack(Script, first, mid, arraymid, last)
    return Script
FlocTankModulesLF := stack(FlocModCapsScript, FlocModPipeScript, FlocModSpacerScript, ThawCapPipe, ArrayCapPipe, FrzCapPipe, ThawSpacer, ArraySpacer, FlocModSpacerLast, FrzSpacer)
FlocModules :=
    FlocTankModulesLF if Q_Plant ≤ Q_PlantMaxLF
    FlocModulesOverlapping if EN_ModuleIdentical == 1 and Q_Plant > Q_PlantMaxLF
    FlocModulesNonOverlapping otherwise
# Horizontal Baffles
FlocBaffleLayerH := layer_new("FlocModBaffles", ltpurple)
FreezeFlocBafflesH := FreezeLayer("FlocModBaffles")
FlocTankBaffleScriptH :=
    Local ← "null" if EN_FlocHoriz ≠ 1
    otherwise
        Local ← FlocBaffleLayerH
        for i ∈ 0 .. (N_FlocChannels - 1)
            for j ∈ 0 .. 1
                Local ← stack(Local, BoxF([Floc_Origin[0] - L_Sed; -L_Slot; Floc_Origin[2]] + [X_FlocBaffles[j, i]; Y_FlocBaffles[j, i]; Z_FlocBaffles[j, i]], [Floc_Origin[0] - L_Sed; -L_Slot; Floc_Origin[2]] + [X_FlocBaffles[j, i]; Y_FlocBaffles[j, i]; Z_FlocBaffles[j, i]] + [T_FlocBaffle; L_FlocBaffles[j, i]; H_Floc], [0; 0; 0]*deg))
                Local ← stack(Local, ArrayLast(1, N_FlocChannelBaffles[i]/2, 2*B_FlocBaffle[i]))
    Local ← stack(Local, FreezeFlocBafflesH)
    return Local
# Channel Drains
FlocTankDrainCouplingScript :=
    Local ← layer_new("FlocDrainCouplingPlu", green)
    for i ∈ 0 .. last(Y_FlocDrainValves)
        Local ← stack(Local, CouplingSUBF([-L_Floc - SocketDepth(ND_FlocValve); Y_FlocDrainValves[i]; Floc_Origin[2]], [0; 0]*deg, ND_FlocValve, PS_Default, ["FlocTankCon"]))
    return stack(Local, FreezeLayer("FlocDrainCouplingPlu"))
FlocTankDrainPipeScript :=
    Local ← layer_new("FlocDrainPipePlu", blue)
    for i ∈ 0 .. last(Y_FlocDrainValves)
        Local ← stack(Local, PipeSUBF([
            -L_Floc - CouplingLength(ND_FlocValve) + SocketDepth(ND_FlocValve);
            Y_FlocDrainValves[i];
            Floc_Origin[2]
        ], max(T_PlantWall - CouplingLength(ND_FlocValve), 0 m) + 2*SocketDepth(ND_FlocValve), [0; 0]*deg, ND_FlocValve, PS_Default, ["FlocTankCon"]))
    return stack(Local, FreezeLayer("FlocDrainPipePlu"))
FlocDrainAdapterLayer := layer_new("FlocDrainAdapterPlu", blue)
DrawFlocDrainAdapter1 := MaleAdapterF(FlocAdapter1_Origin, [0; 0]*deg, ND_FlocValve, PS_Default)
FlocTankDrainAdapterScript := stack(FlocDrainAdapterLayer, DrawFlocDrainAdapter1, FreezeLayer("FlocDrainAdapterPlu"))
FlocDrainValveLayer := layer_new("FlocDrainValvePlu", blue)
InsertFlocDrainValve := insertdwg("https://confluence.cornell.edu/download/attachments/173604905/Floc-Scaled-Gate-Valve-Threaded.dwg", FlocValve_Origin, D_FlocScale, D_FlocScale, 0 deg)
FlocTankDrainValveScript := stack(FlocDrainValveLayer, InsertFlocDrainValve, FreezeLayer("FlocDrainValvePlu"))
# For this script to work, you need to modify the search path in AutoCAD everytime you want to test this on a different computer.  Go to tools->options the under search directory add a new file path.  Browse to find the Final Desgins Folder (or equivalent on a different sevrer).
# Iterates through the values of drain locations and inserts a valve
ThawFlocDrains := ThawMultiple(["FlocDrainAdapterPlu"; "FlocDrainValvePlu"])
ArrayFlocDrains := array_all(ceil(N_FlocChannels/2), 1, 2*(W_FlocChannel + T_FlocChannelWall))
FreezeDrains := FreezeMultiple(["FlocDrainAdapterPlu"; "FlocDrainValvePlu"])
FlocDrainArray := stack(ThawFlocDrains, ArrayFlocDrains, FreezeDrains)
# Rapid Mix Components
FlocRMLayer := layer_new("FlocRMCouplingPlu", green)
DrawFlocRMCoupling := CouplingSUBF(FlocCoupling_Origin, [270; 0]*deg, ND_RMPipe, PS_Default, ["FlocTankCon"])  # FlocModPipeFrz
FreezeFlocRMCoupling := FreezeLayer("FlocRMCouplingPlu")
# Orifice Plate
LayerRMOrificePlate := layer_new("FlocRmOrificePlate", red)
RMOrificePlate := CylinderF([
    FlocCoupling_Origin[0];
    Floc_Origin[1] + N_FlocChannels*W_FlocChannel + (N_FlocChannels - 1)*T_FlocChannelWall - L_FlocCouplingExt + SocketDepth(ND_RMPipe);
    FlocCoupling_Origin[2]
], outerradius(ND_RMPipe), T_RMOrificePlate, [90; 0; 0]*deg)
RMOrificePlateLF := CylinderF(FlocCoupling_Origin, outerradius(ND_RMPipe), T_RMOrificePlate, [90; 0; 0]*deg)
FreezeRMOrificePlate := FreezeLayer("FlocRmOrificePlate")
RMOrifice := CylinderF([
    FlocCoupling_Origin[0];
    Floc_Origin[1] + N_FlocChannels*W_FlocChannel + (N_FlocChannels - 1)*T_FlocChannelWall - L_FlocCouplingExt + SocketDepth(ND_RMPipe);
    FlocCoupling_Origin[2]
], D_RMOrifice/2, T_RMOrificePlate, [90; 0; 0]*deg)
RMOrificeLF := CylinderF(FlocCoupling_Origin, D_RMOrifice/2, T_RMOrificePlate, [90; 0; 0]*deg)
SubtractRMOrifice := SubtractF(["FlocRmOrificePlate"], "DeleteMe")
RMOrificePlateScript :=
    stack(LayerRMOrificePlate, RMOrificePlateLF, FreezeRMOrificePlate, RMOrificeLF, GroupDelete, SubtractRMOrifice) if Q_Plant ≤ Q_PlantMaxLF
    stack(LayerRMOrificePlate, RMOrificePlate, FreezeRMOrificePlate, RMOrifice, GroupDelete, SubtractRMOrifice) otherwise
FlocRMPlateHolderLayer := layer_new("FlocRmPlateHolder", red)
RMOrificePlateHolderStub := PipeF([
    FlocCoupling_Origin[0];
    Floc_Origin[1] + N_FlocChannels*W_FlocChannel + (N_FlocChannels - 1)*T_FlocChannelWall - L_FlocCouplingExt + SocketDepth(ND_RMPipe) - T_RMOrificePlate;
    FlocCoupling_Origin[2]
], SocketDepth(ND_RMPipe), [90; 0; 0]*deg, ND_RMPipe, PS_Default)
RMOrificePlateHolderStubLF := PipeF(FlocCoupling_Origin - [0 m; T_RMOrificePlate; 0 m], T_PlantWall - (CouplingLength(ND_RMPipe) - SocketDepth(ND_RMPipe)), [90; 0; 0]*deg, ND_RMPipe, PS_Default)
FlocRmPlateHolderFrz := FreezeLayer("FlocRmPlateHolder")
RMPlateHolderScript :=
    FlocRMPlateHolderLayer, RMOrificePlateHolderStubLF, FlocRmPlateHolderFrz if Q_Plant ≤ Q_PlantMaxLF
    FlocRMPlateHolderLayer, RMOrificePlateHolderStub, FlocRmPlateHolderFrz otherwise
# Orifice Plate Rod
D_RMOrificePlateRod := 3/8*in
OrificePlateRodLayer := layer_new("FlocOrificePlateRod", black)
OrificePlateRod := CylinderF([
    FlocCoupling_Origin[0];
    Floc_Origin[1] + N_FlocChannels*W_FlocChannel + (N_FlocChannels - 1)*T_PlantWall - L_FlocCouplingExt/2;
    FlocCoupling_Origin[2] + ConRadius(ND_RMPipe) + zc
], D_RMOrificePlateRod, OuterDiameterFittingPVC(ND_RMPipe) + 2*zc, [0; 270; 0]*deg)
OrificePlateRodLF := CylinderF(FlocCoupling_Origin - [0; T_RMOrificePlate + SocketDepth(ND_RMPipe) - L_FlocCouplingExt/2; -ConRadius(ND_RMPipe) - zc], D_RMOrificePlateRod, OuterDiameterFittingPVC(ND_RMPipe) + 2*zc, [0; 270; 0]*deg)
FreezeOrificePlateRod := FreezeLayer("FlocOrificePlateRod")
SubtractOrificePlateRodCoupling := SubtractF(["FlocRMCouplingPlu"], "DeleteMe")
SubtractOrificePlateRodPipe := SubtractF(["FlocRmPlateHolder"], "DeleteMe")
OrificePlateRodScript :=
    stack(OrificePlateRodLF, GroupDelete, SubtractOrificePlateRodPipe, OrificePlateRodLayer, OrificePlateRodLF, FreezeOrificePlateRod) if Q_Plant ≤ Q_PlantMaxLF
    stack(OrificePlateRod, GroupDelete, SubtractOrificePlateRodPipe, OrificePlateRodLayer, OrificePlateRod, FreezeOrificePlateRod) otherwise
FlocRMScript := stack(FlocRMLayer, DrawFlocRMCoupling, FreezeFlocRMCoupling, RMOrificePlateScript, FlocRMPlateHolderLayer, RMOrificePlateHolderStub, FlocRmPlateHolderFrz, OrificePlateRodScript)
AC_FlocTank :=
    stack(FlocTankScript, FlocTankBaffleScriptH, FlocTankDrainCouplingScript, FlocTankDrainPipeScript, FlocTankDrainAdapterScript, FlocTankDrainValveScript, FlocRMScript) if EN_FlocHoriz == 1 and N_FlocChannels ≤ 2
    stack(FlocTankScript, FlocTankBaffleScriptH, FlocTankDrainCouplingScript, FlocTankDrainPipeScript, FlocTankDrainAdapterScript, FlocTankDrainValveScript, FlocDrainArray, FlocRMScript) if EN_FlocHoriz == 1 and N_FlocChannels > 2
    stack(FlocTankScript, FlocTankBaffleScriptV, FlocModules, FlocTankDrainCouplingScript, FlocTankDrainPipeScript, FlocTankDrainAdapterScript, FlocTankDrainValveScript, FlocRMScript) if EN_FlocHoriz == 0 and N_FlocChannels ≤ 2
    stack(FlocTankScript, FlocTankBaffleScriptV, FlocModules, FlocTankDrainCouplingScript, FlocTankDrainPipeScript, FlocTankDrainAdapterScript, FlocTankDrainValveScript, FlocDrainArray, FlocRMScript) otherwise
# [component: inputs AC_FlocTank]
