# [reference: MasterProgram.xmcd]
# Flocculator AutoCAD
# Dimensions
TotalFloc_Dim := [
    L_FlocTank/N_FlocChannels;
    (N_FlocChannels*W_FlocChannel) + ((N_FlocChannels - 1)*T_PlantWall);
    H_Floc
]
Wall_Dim := [TotalFloc_Dim[0] + 2*T_PlantWall; T_PlantWall; TotalFloc_Dim[2]]
FlocPort_Dim :=
    for i ∈ 0 .. (N_FlocChannels - 2)
        FlocPort_Dim[0, i] ← [W_FlocPort[N_FlocChannels - 2 - i]; T_PlantWall; (-H_FlocPort)[i]]
    return FlocPort_Dim
# Floc ports connect the channels.
ChannelOpening_Dim := [
    W_SedInletChannelPreWeir;
    T_PlantWall;
    (H_Floc - H_Sed) + H_SedInletChannel + (HW_Sed - HW_FlocChannel)
] = [0.388538; 0.15; 0.710804] m
# normally want a 30deg slope, unless FlocModuleBaffle is too close
# set slope to be 5 cm away from nearest Baffle
FlocDrainSlope_Dim :=
    [-sqrt(3)*H_FlocSlope; -D_FlocValve; -H_FlocSlope] if sqrt(3)*H_FlocSlope < W_FlocPort[0] + S_FlocPortGap - 5 cm
    [-(W_FlocPort[0] + S_FlocPortGap - 5 cm); -D_FlocValve; -H_FlocSlope] otherwise
Port_Dim := [T_FlocBaffle + 2*zc; L_BafflePort + L_Slot; L_BafflePort]
BaffleSlot1_Dim := [T_FlocBaffle; W_FlocChannel + 2*L_Slot; H_Floc - Z_FlocBaffles[0, 0]]
BaffleSlot1Last_Dim := [T_FlocBaffle; W_FlocChannel + 2*L_Slot; H_Floc - Z_FlocBaffles[0, N_FlocChannels - 1]]
BaffleSlot2_Dim := [T_FlocBaffle; W_FlocChannel + 2*L_Slot; H_Floc - Z_FlocBaffles[1, 0]]
BaffleSlot2Last_Dim := [T_FlocBaffle; W_FlocChannel + 2*L_Slot; H_Floc - Z_FlocBaffles[1, N_FlocChannels - 1]]
# Origin Points
Floc_Origin := [
    Plant_Origin[0];
    Plant_Origin[1] + N_SedTanks*(W_Sed + T_PlantWall);
    Plant_Origin[2] + (HW_Sed - HW_FlocChannel)
]
Wall_Origin := [Floc_Origin[0] - TotalFloc_Dim[0] - T_PlantWall; Floc_Origin[1] + W_FlocChannel; Floc_Origin[2]]
FlocCoupling_Origin := [
    Floc_Origin[0] - ConRadius(ND_RMPipe) - S_Fitting;
    Floc_Origin[1] + N_FlocChannels*W_FlocChannel + T_PlantWall*(N_FlocChannels - 1) + SocketDepth(ND_RMPipe);
    Floc_Origin[2] + outerradius(ND_RMPipe) + S_Fitting
]
FlocPort_Origin :=
    for i ∈ 0 .. (N_FlocChannels - 2)
        if mod(i, 2) ≠ 0
            FlocPort_Origin[0, i] ← [
                Floc_Origin[0] - TotalFloc_Dim[0];
                Floc_Origin[1] + (W_FlocChannel*(1 + i)) + (T_PlantWall*i);
                Floc_Origin[2] + H_FlocPort[i]
            ]
        otherwise
            FlocPort_Origin[0, i] ← [
                Floc_Origin[0] - W_FlocPort[N_FlocChannels - 2 - i];
                Floc_Origin[1] + (W_FlocChannel*(1 + i)) + (T_PlantWall*i);
                Floc_Origin[2] + H_FlocPort[i]
            ]
    return FlocPort_Origin
# The flocport origins were set to start at the top height of the ports themselves (added to the origin otherwise it disappears).  This changes the flocports to be at the bottom of the channel dividing walls instead of at the top (more structurally sound).
FlocPort_Origin = [[-0.307196; 7.4508; 0.6], [-6.22193; 8.2008; 0.6], [-0.307196; 8.9508; 0.6]] m
# The Channel Opening was changed in the z-direction so that the bottom opening aligned with the bottom of the tank (for the same reason as the flocports).
ChannelOpening_Origin := [
    Floc_Origin[0] - TotalFloc_Dim[0];
    Floc_Origin[1] - T_PlantWall;
    Floc_Origin[2] + TotalFloc_Dim[2] - ChannelOpening_Dim[2]
] = [-6.22193; 6.7008; 1.49984] m
# "L" origins are for the last channel only
LargeCap_Origin := [
    -CapDiameter(1.5 in)/2 + outerradius(1.5 in) + Floc_Origin[0] - L_Sed + X_FlocBaffles[0, 0];
    (Floc_Origin[1] + W_FlocChannel*N_FlocChannels + T_PlantWall*(N_FlocChannels - 1) - .05 m);
    Floc_Origin[2] + 4*S_ModulePipesV + S_FlocBaffle[last(S_FlocBaffle)]*Pi_FlocBaffle - .05 m
] = [-5.89918; 9.6508; 1.35704] m
# Shifted LargeCap.Origin and LargeCapL.Origin (y and z values) to within 0.05m of each wall
# Matched L.Origin's to the rest of the Origins to account for now-equivalent FlocModuleBaffle spacings.
LargeCapL_Origin := [
    -CapDiameter(1.5 in)/2 + outerradius(1.5 in) + Floc_Origin[0] - L_Sed + X_FlocBaffles[0, 0] + B_FlocBaffle[0];
    Floc_Origin[1] + W_FlocChannel - .05 m;
    Floc_Origin[2] + 4*S_ModulePipesV + S_FlocBaffle[last(S_FlocBaffle)]*Pi_FlocBaffle - .05 m
] = [-5.58998; 7.4008; 1.35704] m
FittedCap_Origin := LargeCap_Origin + [
    T_FlocBaffle + CapDiameter(0.5 in)/2 - outerradius(0.5 in) + CapDiameter(1.5 in)/2 - outerradius(1.5 in);
    0 m;
    0 m
]
FittedCapL_Origin := LargeCapL_Origin + [
    T_FlocBaffle + CapDiameter(0.5 in)/2 - outerradius(0.5 in) + CapDiameter(1.5 in)/2 - outerradius(1.5 in);
    0 m;
    0 m
]
LongPipe_Origin := FittedCap_Origin + [L_FlocModuleLong[0]; 0 m; 0 m]
LongPipeL_Origin := FittedCapL_Origin + [L_FlocModuleLong[0]; 0 m; 0 m]
ModuleCoupling_Origin := LongPipe_Origin + [CouplingLength(0.5 in) - 2*SocketDepth(0.5 in); 0 m; 0 m]
ModuleCouplingL_Origin := LongPipeL_Origin + [CouplingLength(0.5 in) - 2*SocketDepth(0.5 in); 0 m; 0 m]
ConnectorPipe_Origin := ModuleCoupling_Origin + [L_FlocModuleConnector[0]; 0 m; 0 m]
ConnectorPipeL_Origin := ModuleCouplingL_Origin + [L_FlocModuleConnector[0]; 0 m; 0 m]
FlocAdapter1_Origin :=
    [-L_Sed - CouplingLength(ND_FlocValve) - T_PlantWall; Y_FlocDrainValves[0]; Floc_Origin[2]] if EN_PlantDrains == 0
    otherwise
        [
            Plant_Origin[0] + max(CouplingLength(ND_FlocValve), T_PlantWall) + SocketDepth(ND_FlocValve);
            Y_FlocDrainValves[0];
            Floc_Origin[2]
        ]
FlocValve_Origin := FlocAdapter1_Origin + [
    MaleAdapterLength(ND_FlocValve) - SocketDepth(ND_FlocValve) - ValveSocket(ND_FlocValve) + ValveLength(ND_FlocValve);
    0 m;
    0 m
]
FlocAdapter2_Origin := FlocValve_Origin + [MaleAdapterLength(ND_FlocValve) - SocketDepth(ND_FlocValve) - ValveSocket(ND_FlocValve); 0 m; 0 m]
FlocDrainNipple_Origin := FlocAdapter2_Origin + [2*SocketDepth(ND_FlocValve); 0 m; 0 m]  # assumes drains are on right
BaffleSlot1_Origin := [Floc_Origin[0] - L_Sed; -L_Slot; Floc_Origin[2]] + [X_FlocBaffles[0, 0]; Y_FlocBaffles[0, 0]; Z_FlocBaffles[0, 0]]
BaffleSlot1Last_Origin := [Floc_Origin[0] - L_Sed; -L_Slot; Floc_Origin[2]] + [
    X_FlocBaffles[0, N_FlocChannels - 1];
    Y_FlocBaffles[0, N_FlocChannels - 1];
    Z_FlocBaffles[0, N_FlocChannels - 1]
]
BaffleSlot2_Origin := [Floc_Origin[0] - L_Sed; -L_Slot; Floc_Origin[2]] + [X_FlocBaffles[1, 0]; Y_FlocBaffles[0, 0]; Z_FlocBaffles[1, 0]]
BaffleSlot2Last_Origin := [Floc_Origin[0] - L_Sed; -L_Slot; Floc_Origin[2]] + [
    X_FlocBaffles[1, N_FlocChannels - 1];
    Y_FlocBaffles[0, N_FlocChannels - 1];
    Z_FlocBaffles[1, N_FlocChannels - 1]
]
BafflePort1V_Origin := [Floc_Origin[0] - L_Sed - zc; W_FlocChannel - L_BafflePort; Floc_Origin[2]] + [X_FlocBaffles[0, 0]; Y_FlocBaffles[0, 0]; Z_FlocBaffles[0, 0]]
BafflePort1VLast_Origin := [Floc_Origin[0] - zc - T_FlocBaffle; W_FlocChannel - L_BafflePort; Floc_Origin[2]] + [
    -X_FlocBaffles[0, N_FlocChannels - 1];
    Y_FlocBaffles[0, N_FlocChannels - 1];
    Z_FlocBaffles[1, N_FlocChannels - 1]
]
BafflePort2V_Origin := [Floc_Origin[0] - L_Sed - zc; -L_Slot; Floc_Origin[2]] + [X_FlocBaffles[2, 0]; Y_FlocBaffles[0, 0]; Z_FlocBaffles[2, 0]]
BafflePort2VLast_Origin := [Floc_Origin[0] - zc - T_FlocBaffle; -L_Slot; Floc_Origin[2]] + [
    -X_FlocBaffles[2, N_FlocChannels - 1];
    Y_FlocBaffles[0, N_FlocChannels - 1];
    Z_FlocBaffles[3, N_FlocChannels - 1]
]
# Flocculator Concrete
FlocTankLayer := layer_new("FlocTankCon", grey)
DrawFlocTank := Tank(Floc_Origin, TotalFloc_Dim, T_PlantWall)
DrawFlocWall := BoxF(Wall_Origin, Wall_Origin + Wall_Dim, [0; 0; 0]*deg)
ArrayFlocWall := ArrayLast(N_FlocChannels - 1, 1, W_FlocChannel + T_PlantWall)
FlocChannelPorts :=
    Local ← FreezeLayer("FlocTankCon")
    for i ∈ 0 .. (N_FlocChannels - 2)
        Local ← stack(Local, BoxF(FlocPort_Origin[0, i], FlocPort_Origin[0, i] + FlocPort_Dim[0, i], [0; 0; 0]*deg))
ChannelOpening := BoxF(ChannelOpening_Origin, ChannelOpening_Origin + ChannelOpening_Dim, [0; 0; 0]*deg)
DrawBaffleSlot1 := BoxF(BaffleSlot1_Origin, BaffleSlot1_Origin + BaffleSlot1_Dim, [0; 0; 0]*deg)
DrawBaffleSlot1Last := BoxF(BaffleSlot1Last_Origin, BaffleSlot1Last_Origin + BaffleSlot1Last_Dim, [0; 0; 0]*deg)
DrawBaffleSlot2 := BoxF(BaffleSlot2_Origin, BaffleSlot2_Origin + BaffleSlot2_Dim, [0; 0; 0]*deg)
DrawBaffleSlot2Last := BoxF(BaffleSlot2Last_Origin, BaffleSlot2Last_Origin + BaffleSlot2Last_Dim, [0; 0; 0]*deg)
ArrayBaffleSlot1 := ArrayMultiple([BaffleSlot1_Origin], N_FlocChannels - 1, ceil(N_FlocChannelBaffles[0]/2), -W_FlocChannel - T_PlantWall, 2*B_FlocBaffle[0])
ArrayBaffleSlot2 := ArrayMultiple([BaffleSlot2_Origin], N_FlocChannels - 1, floor(N_FlocChannelBaffles[0]/2), -W_FlocChannel - T_PlantWall, 2*B_FlocBaffle[0])
ArrayBaffleSlot1Last := ArrayMultiple([BaffleSlot1Last_Origin], 1, ceil(N_FlocChannelBaffles[N_FlocChannels - 1]/2), -W_FlocChannel - T_PlantWall, 2*B_FlocBaffle[N_FlocChannels - 1])
ArrayBaffleSlot2Last := ArrayMultiple([BaffleSlot2Last_Origin], 1, floor(N_FlocChannelBaffles[N_FlocChannels - 1]/2), -W_FlocChannel - T_PlantWall, 2*B_FlocBaffle[N_FlocChannels - 1])
Wedge1 :=
    WedgeF([-L_Sed - TotalFloc_Dim[0]; Y_FlocDrainValves[0] + 0.5*D_FlocValve; Floc_Origin[2]], FlocDrainSlope_Dim + [-L_Sed - TotalFloc_Dim[0]; Y_FlocDrainValves[0] + 0.5*D_FlocValve; Floc_Origin[2]], [0; 0; 0]*deg) if EN_PlantDrains == 0
    WedgeF([Plant_Origin[0] - TotalFloc_Dim[0]; Y_FlocDrainValves[0] + 0.5*D_FlocValve; Floc_Origin[2]], [-FlocDrainSlope_Dim[0]; FlocDrainSlope_Dim[1]; FlocDrainSlope_Dim[2]] + [Plant_Origin[0] - TotalFloc_Dim[0]; Y_FlocDrainValves[0] + 0.5*D_FlocValve; Floc_Origin[2]], [0; 0; 0]*deg) otherwise
    = "_wedge -6.22193,7.19525,0 -6.14494,7.10635,-0.04445"
ArrayWedge := ArrayLast(last(Y_FlocDrainValves) + 1, 1, 2*W_FlocChannel + 2*T_PlantWall)
GroupFlocSubtractionPieces := GroupAll("DeleteMe")
SubtractFlocTankPieces := SubtractF(["FlocTankCon"], "DeleteMe")
FlocTankScript :=
    stack(FlocTankLayer, DrawFlocTank, DrawFlocWall, ArrayFlocWall, FlocChannelPorts, ChannelOpening, Wedge1, ArrayWedge, GroupFlocSubtractionPieces, SubtractFlocTankPieces) if L_Slot == 0
    stack(FlocTankLayer, DrawFlocTank, DrawFlocWall, ArrayFlocWall, FlocChannelPorts, ChannelOpening, DrawBaffleSlot1, DrawBaffleSlot2, DrawBaffleSlot1Last, DrawBaffleSlot2Last, ArrayBaffleSlot1, ArrayBaffleSlot2, ArrayBaffleSlot1Last, ArrayBaffleSlot2Last, sp, Wedge1, ArrayWedge, GroupFlocSubtractionPieces, SubtractFlocTankPieces) otherwise
# Vertical Baffles
FlocBaffleLayerV := layer_new("FlocModBaffles", ltpurple)
DrawLowerBaffleV := BoxF([Floc_Origin[0] - L_Sed; -L_Slot; Floc_Origin[2]] + [X_FlocBaffles[0, 0]; Y_FlocBaffles[0, 0]; Z_FlocBaffles[0, 0]], [Floc_Origin[0] - L_Sed; -L_Slot; Floc_Origin[2]] + [X_FlocBaffles[0, 0]; Y_FlocBaffles[0, 0]; Z_FlocBaffles[0, 0]] + [T_FlocBaffle; W_FlocChannel + 2*L_Slot; L_FlocBaffles[0, 0]], [0; 0; 0]*deg)
ArrayLowerBaffleV := ArrayLast(1, ceil(N_FlocChannelBaffles[0]/2), 2*B_FlocBaffle[0])
# Aligned FlocModuleBaffle spacing of last floc channel to the FlocModuleBaffle spacings of the other channels.
DrawUpperBaffleV := BoxF([Floc_Origin[0] - L_Sed; -L_Slot; Floc_Origin[2]] + [X_FlocBaffles[1, 0]; Y_FlocBaffles[0, 0]; Z_FlocBaffles[1, 0]], [Floc_Origin[0] - L_Sed; -L_Slot; Floc_Origin[2]] + [X_FlocBaffles[1, 0]; Y_FlocBaffles[0, 0]; Z_FlocBaffles[1, 0]] + [T_FlocBaffle; W_FlocChannel + 2*L_Slot; L_FlocBaffles[1, 0]], [0; 0; 0]*deg)
ArrayUpperBaffleV := ArrayLast(1, floor(N_FlocChannelBaffles[0]/2), 2*B_FlocBaffle[0])
ArrayBafflesChannelV := array_all(N_FlocChannels - 1, 1, -W_FlocChannel - T_PlantWall)
DrawLastLowerBaffleV := BoxF([Floc_Origin[0]; -L_Slot; Floc_Origin[2]] + [
    -X_FlocBaffles[0, N_FlocChannels - 1];
    Y_FlocBaffles[0, N_FlocChannels - 1];
    Z_FlocBaffles[0, N_FlocChannels - 1]
], [Floc_Origin[0]; -L_Slot; Floc_Origin[2]] + [
    -X_FlocBaffles[0, N_FlocChannels - 1];
    Y_FlocBaffles[0, N_FlocChannels - 1];
    Z_FlocBaffles[0, N_FlocChannels - 1]
] + [-T_FlocBaffle; W_FlocChannel + 2*L_Slot; L_FlocBaffles[0, N_FlocChannels - 1]], [0; 0; 0]*deg)
ArrayLastLowerBaffleV := ArrayLast(1, floor(N_FlocChannelBaffles[last(N_FlocChannelBaffles)]/2), -(2*B_FlocBaffle[0]))
DrawLastUpperBaffleV := BoxF([Floc_Origin[0]; -L_Slot; Floc_Origin[2]] + [
    -X_FlocBaffles[1, N_FlocChannels - 1];
    Y_FlocBaffles[0, N_FlocChannels - 1];
    Z_FlocBaffles[1, N_FlocChannels - 1]
], [Floc_Origin[0]; -L_Slot; Floc_Origin[2]] + [
    -X_FlocBaffles[1, N_FlocChannels - 1];
    Y_FlocBaffles[0, N_FlocChannels - 1];
    Z_FlocBaffles[1, N_FlocChannels - 1]
] + [-T_FlocBaffle; W_FlocChannel + 2*L_Slot; L_FlocBaffles[1, N_FlocChannels - 1]], [0; 0; 0]*deg)
ArrayLastUpperBaffleV := ArrayLast(1, floor(N_FlocChannelBaffles[last(N_FlocChannelBaffles)]/2), -(2*B_FlocBaffle[0]))
FreezeBafflesV := FreezeLayer("FlocModBaffles")
DrawBafflePort1V := BoxF(BafflePort1V_Origin, BafflePort1V_Origin + Port_Dim, [0; 0; 0]*deg)
DrawBafflePort1VLast := BoxF(BafflePort1VLast_Origin, BafflePort1VLast_Origin + Port_Dim, [0; 0; 0]*deg)
DrawBafflePort2V := BoxF(BafflePort2V_Origin, BafflePort2V_Origin + Port_Dim, [0; 0; 0]*deg)
DrawBafflePort2VLast := BoxF(BafflePort2VLast_Origin, BafflePort2VLast_Origin + Port_Dim, [0; 0; 0]*deg)
ArrayPort1V := ArrayMultiple([BafflePort1V_Origin], N_FlocChannels - 1, ceil(N_FlocChannelBaffles[0]/4), -W_FlocChannel - T_PlantWall, 4*B_FlocBaffle[0])
ArrayPort2V := ArrayMultiple([BafflePort2V_Origin], N_FlocChannels - 1, ceil((N_FlocChannelBaffles[0] - 2)/4), -W_FlocChannel - T_PlantWall, 4*B_FlocBaffle[0])
ArrayPort1VLast := ArrayMultiple([BafflePort1VLast_Origin], 1, ceil(N_FlocChannelBaffles[N_FlocChannels - 1]/4), -W_FlocChannel - T_PlantWall, -(4*B_FlocBaffle[N_FlocChannels - 1]))
ArrayPort2VLast := ArrayMultiple([BafflePort2VLast_Origin], 1, ceil((N_FlocChannelBaffles[N_FlocChannels - 1] - 3)/4), -W_FlocChannel - T_PlantWall, -(4*B_FlocBaffle[N_FlocChannels - 1]))
GroupBafflesV := GroupAll("DeleteMe")
SubtractBafflePortsV := SubtractF(["FlocModBaffles"], "DeleteMe")
MirrorBafflesV := MirrorAll([Floc_Origin[0]; Floc_Origin[1]] - [L_Sed/2; 0 m], [Floc_Origin[0]; Floc_Origin[1]] - [L_Sed/2; zc], "y")
FlocTankBaffleScriptV := stack(FlocBaffleLayerV, DrawLowerBaffleV, ArrayLowerBaffleV, DrawUpperBaffleV, ArrayUpperBaffleV, ArrayBafflesChannelV, DrawLastLowerBaffleV, ArrayLastLowerBaffleV, DrawLastUpperBaffleV, ArrayLastUpperBaffleV, FreezeBafflesV, DrawBafflePort1V, DrawBafflePort2V, DrawBafflePort1VLast, DrawBafflePort2VLast, ArrayPort1V, ArrayPort2V, ArrayPort1VLast, ArrayPort2VLast, GroupBafflesV, SubtractBafflePortsV, SelectLayer("FlocModBaffles"), MirrorBafflesV, FreezeLayer("FlocModBaffles"))
# Module Piping for Odd-Numbered Channels
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# Modules labeled "1" are for the odd-numbered channels (1st, 3rd, etc) while "Mod2" are those facing the opposite direction in the even-numbered channels.
FlocMod1CapLayer := layer_new("FlocMod1CapPlu", red)
FlocModLargeCap := CapF(LargeCap_Origin, [0; 0]*deg, ND_FlocModulesLarge)
FlocModFittedCap := CapF(FittedCap_Origin, [180; 0]*deg, ND_FlocModulesMain)
FlocMod1CapFrz := FreezeLayer("FlocMod1CapPlu")
FlocMod1CouplingLayer := layer_new("FlocMod1CouplingPlu", green)
FlocModCoupling := CouplingF(ModuleCoupling_Origin, [0; 0]*deg, ND_FlocModulesMain, PS_Modules)
FlocMod1CouplingFrz := FreezeLayer("FlocMod1CouplingPlu")  # must freeze this layer to ensure it gets grouped
FlocMod1PipeLayer := layer_new("FlocMod1PipePlu", blue)
FlocModLongPipe := PipeSUBF(LongPipe_Origin, L_FlocModuleLong[0], [0; 0]*deg, ND_FlocModulesMain, PS_Modules, ["FlocModBaffles"])
FlocModConnectorPipe := PipeF(ConnectorPipe_Origin, L_FlocModuleConnector[0], [0; 0]*deg, ND_FlocModulesMain, PS_Modules)
FlocMod1PipeFrz := FreezeLayer("FlocMod1PipePlu")
FlocMod1SpacerLayer := layer_new("FlocMod1SpacerPlu", blue)
FlocModSpacerPipe1 := PipeF(FittedCap_Origin + [S_FlocBaffle[0] - CapThickness(ND_FlocModulesMain); 0; 0], S_FlocBaffle[0] - CapHeight(ND_FlocModulesMain), [0; 0]*deg, ND_SpacerPipe, PS_Modules)
FlocModSpacerPipe2 := PipeF(FittedCap_Origin + [2*S_FlocBaffle[0] - CapThickness(ND_FlocModulesMain) + T_FlocBaffle; 0; 0], S_FlocBaffle[0], [0; 0]*deg, ND_SpacerPipe, PS_Modules)
ArrayFlocModSpacer := ArrayLast(1, N_FlocChannelBafflesLong[0] - 2, B_FlocBaffle[0])
FlocMod1SpacerFrz := FreezeLayer("FlocMod1SpacerPlu")
FlocMod1Spacer :=
    stack(FlocMod1SpacerLayer, FlocModSpacerPipe1, FlocMod1SpacerFrz) if N_FlocChannelBafflesLong[0] == 2
    stack(FlocMod1SpacerLayer, FlocModSpacerPipe1, FlocModSpacerPipe2, ArrayFlocModSpacer, FlocMod1SpacerFrz) otherwise
ThawFlocMod1Components := ThawMultiple(["FlocMod1*Plu"])
ArrayFlocModX := array_all(1, N_FlocChannelModulesLong[0], B_FlocBaffle[0]*N_FlocChannelBafflesLong[0])
FrzFlocModComponents := FreezeMultiple(["FlocMod*"])
SelectFlocMod1Spacer := SelectLayer("FlocMod1SpacerPlu")
FlocModSpacerPipe1Short := PipeF([
    Plant_Origin[0] - X_FlocBaffles[(N_FlocChannelBafflesShort[0] - 2)*(N_FlocChannelBafflesShort[0] > 2), 0] - T_FlocBaffle;
    FittedCap_Origin[1];
    FittedCap_Origin[2]
], S_FlocBaffle[0] - CapHeight(ND_FlocModulesMain), [0; 0]*deg, ND_SpacerPipe, PS_Modules)
FlocModSpacerPipe2Short := PipeF([
    Plant_Origin[0] - X_FlocBaffles[(N_FlocChannelBafflesShort[0] - 3)*(N_FlocChannelBafflesShort[0] > 2), 0] - T_FlocBaffle;
    FittedCap_Origin[1];
    FittedCap_Origin[2]
], S_FlocBaffle[0], [0; 0]*deg, ND_SpacerPipe, PS_Modules)
ArrayFlocModSpacerShort := ArrayLast(1, N_FlocChannelBafflesShort[0] - 2, B_FlocBaffle[0])
FlocShortBaffleSpacers1 :=
    stack(SelectFlocMod1Spacer, FlocModSpacerPipe1Short, FlocModSpacerPipe2Short) if N_FlocChannelBafflesShort[0] == 3
    stack(SelectFlocMod1Spacer, FlocModSpacerPipe1Short, FlocModSpacerPipe2Short, ArrayFlocModSpacerShort) otherwise
# FlocModSpacerFrz
SelectFlocMod1Piping := SelectLayer("FlocMod1PipePlu")
FlocModShortPipe := PipeF([
    Floc_Origin[0] - X_FlocBaffles[0, 0] + SocketDepth(ND_FlocModulesMain);
    LargeCap_Origin[1];
    LargeCap_Origin[2]
], L_FlocModuleShort[0], [0; 0]*deg, ND_FlocModulesMain, PS_Modules)
FlocModEndPipe := PipeF([Floc_Origin[0]; LargeCap_Origin[1]; LargeCap_Origin[2]], {
    L_FlocModuleShort[0] if N_FlocChannelBafflesShort[0] < 2
    (X_FlocBaffles[0, 0] - CouplingLength(ND_FlocModulesMain) + SocketDepth(ND_FlocModulesMain)) otherwise
}, [0; 0]*deg, ND_FlocModulesMain, PS_Modules)
FlocModRightPipe :=
    FlocModEndPipe if N_FlocChannelBafflesShort[0] < 2
    stack(FlocModShortPipe, FlocModEndPipe) otherwise
# FlocModPipeFrz
SelectFlocMod1PipeCap := SelectLayer("FlocMod1CapPlu")
FlocModLastLargeCap := CapF([
    {
        (Floc_Origin[0] - X_FlocBaffles[N_FlocChannelBafflesShort[0] - 1, 0] - T_FlocBaffle - (CapDiameter(ND_FlocModulesLarge)/2 - outerradius(ND_FlocModulesLarge))) if N_FlocChannelBafflesShort[0] ≥ 1
        (Floc_Origin[0] - X_FlocBaffles[0, 0] - T_FlocBaffle - (CapDiameter(ND_FlocModulesLarge)/2 - outerradius(ND_FlocModulesLarge))) otherwise
    };
    LargeCap_Origin[1];
    LargeCap_Origin[2]
], [0; 0]*deg, ND_FlocModulesLarge)
FlocModLastFittedCap := CapF([
    {
        (Floc_Origin[0] - X_FlocBaffles[N_FlocChannelBafflesShort[0] - 1, 0] + (CapDiameter(ND_FlocModulesMain)/2 - outerradius(ND_FlocModulesMain))) if N_FlocChannelBafflesShort[0] ≥ 1
        (Floc_Origin[0] - X_FlocBaffles[0, 0] + (CapDiameter(ND_FlocModulesMain)/2 - outerradius(ND_FlocModulesMain))) otherwise
    };
    LargeCap_Origin[1];
    LargeCap_Origin[2]
], [180; 0]*deg, ND_FlocModulesMain)
# FlocModCapFrz
# only if the short baffle doesn't have one baffle!!!
SelectFlocMod1Coupling := SelectLayer("FlocMod1CouplingPlu")
LastFlocModCoupling := CouplingF([
    Floc_Origin[0] - X_FlocBaffles[0, 0] + CouplingLength(ND_FlocModulesMain) - SocketDepth(ND_FlocModulesMain);
    ModuleCoupling_Origin[1];
    ModuleCoupling_Origin[2]
], [0; 0]*deg, ND_FlocModulesMain, PS_Modules)
# FlocModCouplingFrz
# ThawFlocModComponents
ArrayFlocMod1 := Array_All(ceil((N_FlocChannels - 1)/2), 1, -2*W_FlocChannel - 2*T_PlantWall)
FlocMod1 :=
    stack(FlocMod1CapLayer, FlocModLargeCap, FlocModFittedCap, FlocMod1CapFrz, FlocMod1CouplingLayer, FlocModCoupling, FlocMod1CouplingFrz, FlocMod1PipeLayer, FlocModLongPipe, FlocModConnectorPipe, FlocMod1PipeFrz, FlocMod1Spacer, ThawFlocMod1Components, ArrayFlocModX, FrzFlocModComponents, SelectFlocMod1Piping, FlocModRightPipe, FlocMod1PipeFrz, SelectFlocMod1PipeCap, FlocModLastLargeCap, FlocModLastFittedCap, FlocMod1CapFrz, ThawFlocMod1Components, ArrayFlocMod1, FrzFlocModComponents) if N_FlocChannelBafflesShort[0] < 2
    stack(FlocMod1CapLayer, FlocModLargeCap, FlocModFittedCap, FlocMod1CapFrz, FlocMod1CouplingLayer, FlocModCoupling, FlocMod1CouplingFrz, FlocMod1PipeLayer, FlocModLongPipe, FlocModConnectorPipe, FlocMod1PipeFrz, FlocMod1Spacer, ThawFlocMod1Components, ArrayFlocModX, FrzFlocModComponents, FlocShortBaffleSpacers1, FlocMod1SpacerFrz, SelectFlocMod1Piping, FlocModRightPipe, FlocMod1PipeFrz, SelectFlocMod1PipeCap, FlocModLastLargeCap, FlocModLastFittedCap, FlocMod1CapFrz, SelectFlocMod1Coupling, LastFlocModCoupling, FlocMod1CouplingFrz, ThawFlocMod1Components, ArrayFlocMod1, FrzFlocModComponents) otherwise
# Module Piping for Even-Numbered Channels
FlocMod2CapLayer := layer_new("FlocMod2CapPlu", red)
FlocMod2CapFrz := FreezeLayer("FlocMod2CapPlu")
FlocMod2CouplingLayer := layer_new("FlocMod2CouplingPlu", green)
FlocMod2CouplingFrz := FreezeLayer("FlocMod2CouplingPlu")
FlocMod2PipeLayer := layer_new("FlocMod2PipePlu", blue)
FlocMod2PipeFrz := FreezeLayer("FlocMod2PipePlu")
FlocMod2SpacerLayer := layer_new("FlocMod2SpacerPlu", blue)
FlocMod2SpacerFrz := FreezeLayer("FlocMod2SpacerPlu")
FlocMod2Spacer :=
    stack(FlocMod2SpacerLayer, FlocModSpacerPipe1, FlocMod2SpacerFrz) if N_FlocChannelBafflesLong[0] == 2
    stack(FlocMod2SpacerLayer, FlocModSpacerPipe1, FlocModSpacerPipe2, ArrayFlocModSpacer, FlocMod2SpacerFrz) otherwise
ThawFlocMod2Components := ThawMultiple(["FlocMod2*Plu"])
SelectFlocMod2Spacer := SelectLayer("FlocMod2SpacerPlu")
FlocShortBaffleSpacers2 :=
    stack(SelectFlocMod2Spacer, FlocModSpacerPipe1Short, FlocModSpacerPipe2Short) if N_FlocChannelBafflesShort[0] == 3
    stack(SelectFlocMod2Spacer, FlocModSpacerPipe1Short, FlocModSpacerPipe2Short, ArrayFlocModSpacerShort) otherwise
# FlocModSpacerFrz
SelectFlocMod2Piping := SelectLayer("FlocMod2PipePlu")
# FlocModPipeFrz
SelectFlocMod2PipeCap := SelectLayer("FlocMod2CapPlu")
# FlocModCapFrz
SelectFlocMod2Coupling := SelectLayer("FlocMod2CouplingPlu")
# FlocModCouplingFrz
# ThawFlocModComponents
MirrorFlocMod2 := MirrorAll([Floc_Origin[0]; Floc_Origin[1]] - [L_Sed/2; 0 m], [Floc_Origin[0]; Floc_Origin[1]] - [L_Sed/2; zc], "y")
MoveFlocMod2 := MoveAll(Floc_Origin, Floc_Origin - [0 m; W_FlocChannel + T_PlantWall; 0 m])
ArrayFlocMod2 := Array_All(floor((N_FlocChannels - 1)/2), 1, -2*W_FlocChannel - 2*T_PlantWall)
FlocMod2 :=
    stack(FlocMod2CapLayer, FlocModLargeCap, FlocModFittedCap, FlocMod2CapFrz, FlocMod2CouplingLayer, FlocModCoupling, FlocMod2CouplingFrz, FlocMod2PipeLayer, FlocModLongPipe, FlocModConnectorPipe, FlocMod2PipeFrz, FlocMod2Spacer, ThawFlocMod2Components, ArrayFlocModX, FrzFlocModComponents, SelectFlocMod2Piping, FlocModRightPipe, FlocMod2PipeFrz, SelectFlocMod2PipeCap, FlocModLastLargeCap, FlocModLastFittedCap, FlocMod2CapFrz, ThawFlocMod2Components, MirrorFlocMod2, MoveFlocMod2, ArrayFlocMod2, FrzFlocModComponents) if N_FlocChannelBafflesShort[0] < 2
    stack(FlocMod2CapLayer, FlocModLargeCap, FlocModFittedCap, FlocMod2CapFrz, FlocMod2CouplingLayer, FlocModCoupling, FlocMod2CouplingFrz, FlocMod2PipeLayer, FlocModLongPipe, FlocModConnectorPipe, FlocMod2PipeFrz, FlocMod2Spacer, ThawFlocMod2Components, ArrayFlocModX, FrzFlocModComponents, FlocShortBaffleSpacers2, FlocMod2SpacerFrz, SelectFlocMod2Piping, FlocModRightPipe, FlocMod2PipeFrz, SelectFlocMod2PipeCap, FlocModLastLargeCap, FlocModLastFittedCap, FlocMod2CapFrz, SelectFlocMod2Coupling, LastFlocModCoupling, FlocMod2CouplingFrz, ThawFlocMod2Components, MirrorFlocMod2, MoveFlocMod2, ArrayFlocMod2, FrzFlocModComponents) otherwise
# Module Piping for Last Channel
LargeCapLast_Origin := [
    Floc_Origin[0] - X_FlocBaffles[0, cols(X_FlocBaffles) - 1] + CapThickness(ND_FlocModulesLarge);
    Floc_Origin[1] - .05 m + W_FlocChannel;
    Floc_Origin[2] + 4*S_ModulePipesV + S_FlocBaffle[last(S_FlocBaffle)]*Pi_FlocBaffle - .05 m
]
FittedCapLast_Origin := [-T_FlocBaffle - CapThickness(ND_FlocModulesLarge) - CapThickness(ND_FlocModulesMain); 0 m; 0 m] + LargeCapLast_Origin
FlocModCouplingLast_Origin := FittedCapLast_Origin + [-L_FlocModuleLong[last(L_FlocModuleLong)]; 0 m; 0 m]
ConnectorPipeLast_Origin := FlocModCouplingLast_Origin + [-CouplingLength(ND_FlocModulesMain) + 2*SocketDepth(ND_FlocModulesMain); 0 m; 0 m]
# FrzFlocModComponents
# SelectFlocModPipeCap
FlocModLargeCapLast := CapF(LargeCapLast_Origin, [180; 0]*deg, ND_FlocModulesLarge)
ArrayFlocModXCap := ArrayLast(1, N_FlocChannelModulesLong[last(N_FlocChannelModulesLong)] + 1*(N_FlocChannelBafflesShort[last(N_FlocChannelBafflesShort)] > 0), -(B_FlocBaffle[last(B_FlocBaffle)]*N_FlocChannelBafflesLong[last(N_FlocChannelBafflesLong)]))
FlocModFittedCapLast := CapF(FittedCapLast_Origin, [0; 0]*deg, ND_FlocModulesMain)
# ArrayFlocModXCap
# FlocModCapFrz
FlocMod1CouplingSelect := SelectLayer("FlocMod1CouplingPlu")
FlocModCouplingLast := CouplingF(FlocModCouplingLast_Origin, [0; 0]*deg, ND_FlocModulesMain, PS_Modules)
FlocMod1CouplingFrz := FreezeLayer("FlocMod1CouplingPlu")  # must freeze this layer to ensure it gets grouped
FlocMod1PipeSelect := SelectLayer("FlocMod1PipePlu")
FlocModLongPipeLast := PipeSUBF(FittedCapLast_Origin, L_FlocModuleLong[last(L_FlocModuleLong)], [0; 0]*deg, ND_FlocModulesMain, PS_Modules, ["FlocModBaffles"])
ArrayFlocModXLast := ArrayLast(1, N_FlocChannelModulesLong[last(N_FlocChannelModulesLong)], -(B_FlocBaffle[last(B_FlocBaffle)]*N_FlocChannelBafflesLong[last(N_FlocChannelBafflesLong)]))
FlocModConnectorPipeLast :=
    PipeF(ConnectorPipeLast_Origin, S_FlocBaffle[last(S_FlocBaffle)] - CouplingLength(ND_FlocModulesMain) + SocketDepth(ND_FlocModulesMain) - CapThickness(ND_FlocModulesLarge), [0; 0]*deg, ND_FlocModulesMain, PS_Modules) if N_FlocChannelModulesLong[last(N_FlocChannelModulesLong)] - 1 < 2
    stack(PipeF(ConnectorPipeLast_Origin, S_FlocBaffle[last(S_FlocBaffle)] - CouplingLength(ND_FlocModulesMain) + SocketDepth(ND_FlocModulesMain) - CapThickness(ND_FlocModulesLarge), [0; 0]*deg, ND_FlocModulesMain, PS_Modules), ArrayLast(1, N_FlocChannelModulesLong[last(N_FlocChannelModulesLong)] - 1, -(B_FlocBaffle[last(B_FlocBaffle)]*N_FlocChannelBafflesLong[last(N_FlocChannelBafflesLong)]))) otherwise
LastFlocModConnectorPipe := PipeSUBF([
    Plant_Origin[0] - X_FlocBaffles[N_FlocChannelBaffles[last(N_FlocChannelBaffles)] - 1, N_FlocChannels - 1] - CouplingLength(ND_FlocModulesMain) + SocketDepth(ND_FlocModulesMain) - T_FlocBaffle;
    ConnectorPipeLast_Origin[1];
    ConnectorPipeLast_Origin[2]
], L_Sed - X_FlocBaffles[N_FlocChannelBaffles[last(N_FlocChannelBaffles)] - 1, N_FlocChannels - 1] - CouplingLength(ND_FlocModulesMain) + SocketDepth(ND_FlocModulesMain) - T_FlocBaffle, [0; 0]*deg, ND_FlocModulesMain, PS_Modules, ["FlocModBaffles"])
LastFlocModShortPipe :=
    if N_FlocChannelBafflesShort[last(N_FlocChannelBafflesShort)] ≠ 0
        PipeSUBF([
            (Plant_Origin[0] - X_FlocBaffles[N_FlocChannelBafflesLong[last(N_FlocChannelBafflesLong)]*N_FlocChannelModulesLong[last(N_FlocChannelModulesLong)], N_FlocChannels - 1]) - CapThickness(ND_FlocModulesMain) - T_FlocBaffle;
            ConnectorPipeLast_Origin[1];
            ConnectorPipeLast_Origin[2]
        ], L_FlocModuleShort[last(L_FlocModuleShort)], [0; 0]*deg, ND_FlocModulesMain, PS_Modules, ["FlocModBaffles"])
    "0" otherwise
FlocModEndPipeLast := PipeF([
    Floc_Origin[0] - X_FlocBaffles[N_FlocChannelBaffles[last(N_FlocChannelBaffles)] - 1, N_FlocChannels - 1] - T_FlocBaffle - CouplingLength(ND_FlocModulesMain) + SocketDepth(ND_FlocModulesMain);
    FittedCapLast_Origin[1];
    FittedCapLast_Origin[1]
], L_Sed - X_FlocBaffles[N_FlocChannelBaffles[last(N_FlocChannelBaffles)] - 1, N_FlocChannels - 1] - CouplingLength(ND_FlocModulesMain) + SocketDepth(ND_FlocModulesMain) - T_FlocBaffle, [0; 0]*deg, ND_FlocModulesMain, PS_Modules)
# FlocModPipeFrz
FlocModSpacerPipeLast :=
    Local ← stack(SelectLayer("FlocModSpacerPlu"), PipeF(FittedCapLast_Origin + [CapThickness(ND_FlocModulesMain) - CapHeight(ND_FlocModulesMain); 0; 0], S_FlocBaffle[N_FlocChannels - 1] - CapHeight(ND_FlocModulesMain), [0; 0]*deg, ND_SpacerPipe, PS_Modules), ArrayFlocModXLast)
    if N_FlocChannelBafflesLong[N_FlocChannels - 1] > 2
        for i ∈ 0 .. N_FlocChannelBafflesLong[N_FlocChannels - 1] - 3
            Local ← stack(Local, PipeF(FittedCapLast_Origin - [
                S_FlocBaffle[0] - CapThickness(ND_FlocModulesMain) + T_FlocBaffle + B_FlocBaffle[N_FlocChannels - 1]*i;
                0;
                0
            ], S_FlocBaffle[N_FlocChannels - 1], [0; 0]*deg, ND_SpacerPipe, PS_Modules), ArrayFlocModXLast)
    Local
SelectFlocMod1Spacer := SelectLayer("FlocMod1SpacerPlu")
FlocModSpacerPipeLastShort1 :=
    if N_FlocChannelBafflesShort[last(N_FlocChannelBafflesShort)] ≠ 0
        PipeF([
            Plant_Origin[0] - X_FlocBaffles[N_FlocChannelBafflesLong[last(N_FlocChannelBafflesLong)]*N_FlocChannelModulesLong[last(N_FlocChannelModulesLong)], N_FlocChannels - 1] - CapHeight(ND_FlocModulesMain) - T_FlocBaffle;
            FittedCapLast_Origin[1];
            FittedCapLast_Origin[2]
        ], S_FlocBaffle[N_FlocChannels - 1] - CapHeight(ND_FlocModulesMain), [0; 0]*deg, ND_SpacerPipe, PS_Modules)
    "0" otherwise
FlocModSpacerPipeLastShort2 :=
    if N_FlocChannelBafflesShort[last(N_FlocChannelBafflesShort)] ≠ 0
        PipeF([
            Plant_Origin[0] - X_FlocBaffles[(N_FlocChannelBafflesShort[last(N_FlocChannelBafflesShort)] ≠ 0)*(N_FlocChannelBafflesLong[last(N_FlocChannelBafflesLong)]*N_FlocChannelModulesLong[last(N_FlocChannelModulesLong)] + 1), N_FlocChannels - 1] - T_FlocBaffle;
            FittedCapLast_Origin[1];
            FittedCapLast_Origin[2]
        ], S_FlocBaffle[N_FlocChannels - 1], [0; 0]*deg, ND_SpacerPipe, PS_Modules)
    "0" otherwise
ArrayModSpacerShortLast := ArrayLast(1, N_FlocChannelBafflesShort[last(N_FlocChannelBafflesShort)] - 2, -B_FlocBaffle[last(B_FlocBaffle)])
FlocModSpacerPipeLastShortEnd := PipeF([
    Plant_Origin[0] - X_FlocBaffles[N_FlocChannelBaffles[last(N_FlocChannelBaffles)] - 1, N_FlocChannels - 1] - T_FlocBaffle;
    FittedCapLast_Origin[1];
    FittedCapLast_Origin[2]
], L_Sed - X_FlocBaffles[N_FlocChannelBaffles[last(N_FlocChannelBaffles)] - 1, N_FlocChannels - 1], [0; 0]*deg, ND_SpacerPipe, PS_Modules)
# SelectFlocModCoupling
FlocModCouplingLastEnd := CouplingF([
    Floc_Origin[0] - X_FlocBaffles[N_FlocChannelBaffles[last(N_FlocChannelBaffles)] - 1, N_FlocChannels - 1] - T_FlocBaffle - SocketDepth(ND_FlocModulesMain);
    FittedCapLast_Origin[1];
    FittedCapLast_Origin[2]
], [0; 0]*deg, ND_FlocModulesMain, PS_Modules)
# FlocModCouplingFrz
FlocModSpacerShortLast :=
    stack(SelectFlocMod1Spacer, FlocModSpacerPipeLastShort1, FlocMod1SpacerFrz) if N_FlocChannelBafflesShort[last(N_FlocChannelBafflesShort)] == 2
    stack(SelectFlocMod1Spacer, FlocModSpacerPipeLastShort1, FlocModSpacerPipeLastShort2, ArrayModSpacerShortLast, FlocMod1SpacerFrz) otherwise
FlocModLast :=
    stack(SelectFlocMod1PipeCap, FlocModLargeCapLast, ArrayFlocModXCap, FlocModFittedCapLast, ArrayFlocModXCap, FlocMod1CapFrz, FlocMod1CouplingSelect, FlocModCouplingLast, ArrayFlocModXLast, FlocMod1CouplingFrz, FlocMod1PipeSelect, FlocModLongPipeLast, ArrayFlocModXLast, FlocModConnectorPipeLast, LastFlocModConnectorPipe, FlocMod1PipeFrz, SelectFlocMod1Coupling, FlocModCouplingLastEnd, FlocMod1CouplingFrz, FlocModSpacerPipeLast, FrzFlocModComponents) if N_FlocChannelBafflesShort[last(N_FlocChannelBafflesShort)] == 0
    stack(SelectFlocMod1PipeCap, FlocModLargeCapLast, ArrayFlocModXCap, FlocModFittedCapLast, ArrayFlocModXCap, FlocMod1CapFrz, FlocMod1CouplingSelect, FlocModCouplingLast, ArrayFlocModXLast, FlocMod1CouplingFrz, FlocMod1PipeSelect, FlocModLongPipeLast, ArrayFlocModXLast, FlocModConnectorPipeLast, LastFlocModShortPipe, FlocModEndPipeLast, FlocMod1PipeFrz, SelectFlocMod1Coupling, FlocModCouplingLastEnd, FlocMod1CouplingFrz, FlocModSpacerPipeLast, FrzFlocModComponents) otherwise
ThawAllFlocModules := ThawMultiple(["FlocMod*Plu"])
ArrayFlocModY := array_all(2, 1, -W_FlocChannel + .1 m)
# ArrayModulesY and ArrayModulesZ array new pipes to within 0.05m of each wall.
ArrayFlocModZ := array_all(3, 1, (-S_ModulePipesV*4 + .1 m)/2)
MirrorFlocModules := MirrorAll([Floc_Origin[0]; Floc_Origin[1]] - [L_Sed/2; 0 m], [Floc_Origin[0]; Floc_Origin[1]] - [L_Sed/2; zc], "y")
FlocModules := stack(FlocMod1, FlocMod2, FlocModLast, ThawAllFlocModules, ArrayFlocModY, view("f"), ArrayFlocModZ, view("t"), MirrorFlocModules, FrzFlocModComponents)
# Horizontal Baffles
FlocBaffleLayerH := layer_new("FlocModBaffles", ltpurple)
UpperBaffleH := BoxF([Floc_Origin[0] - L_Sed; -L_Slot; Floc_Origin[2]] + [X_FlocBaffles[0, 0]; Y_FlocBaffles[0, 0]; Z_FlocBaffles[0, 0]], [Floc_Origin[0] - L_Sed; -L_Slot; Floc_Origin[2]] + [X_FlocBaffles[0, 0]; Y_FlocBaffles[0, 0]; Z_FlocBaffles[0, 0]] + [T_FlocBaffle; L_FlocBaffles[0, 0]; H_Floc], [0; 0; 0]*deg)
LowerBaffleH :=
    "null" if EN_FlocHoriz ≠ 1
    BoxF([Floc_Origin[0] - L_Sed; -L_Slot; Floc_Origin[2]] + [X_FlocBaffles[1, 0]; Y_FlocBaffles[1, 0]; Z_FlocBaffles[0, 0]], [Floc_Origin[0] - L_Sed; -L_Slot; Floc_Origin[2]] + [X_FlocBaffles[1, 0]; Y_FlocBaffles[1, 0]; Z_FlocBaffles[0, 0]] + [T_FlocBaffle; L_FlocBaffles[0, 0]; H_Floc], [0; 0; 0]*deg) otherwise
ArrayBaffleH := array_all(1, N_FlocChannelBaffles[0]/2, 2*B_FlocBaffle[0])
ArrayBafflesChannelH := array_all(N_FlocChannels, 1, -W_FlocChannel - T_PlantWall)
FreezeFlocBafflesH := FreezeLayer("FlocModBaffles")
FlocTankBaffleScriptH := stack(FlocBaffleLayerH, UpperBaffleH, LowerBaffleH, ArrayBaffleH, ArrayBafflesChannelH, FreezeFlocBafflesH)
# Channel Drains
# This draws the valves on the far side (left side from top view) viewing from the right side
FlocTankDrainCouplingScript :=
    Local ← layer_new("FlocDrainCouplingPlu", green)
    for i ∈ 0 .. last(Y_FlocDrainValves)
        Local ←
            stack(Local, CouplingSUBF([-L_Sed - T_PlantWall - TotalFloc_Dim[0]; Y_FlocDrainValves[i]; Floc_Origin[2]], [0; 0]*deg, ND_FlocValve, PS_Default, ["FlocTankCon"])) if EN_PlantDrains == 0
            otherwise
                stack(Local, CouplingSUBF([
                    Plant_Origin[0] + CouplingLength(ND_FlocValve) - T_PlantWall - TotalFloc_Dim[0];
                    Y_FlocDrainValves[i];
                    Floc_Origin[2]
                ], [0; 0]*deg, ND_FlocValve, PS_Default, ["FlocTankCon"]))
    return stack(Local, FreezeLayer("FlocDrainCouplingPlu"))
FlocTankDrainPipeScript :=
    Local ← layer_new("FlocDrainPipePlu", blue)
    for i ∈ 0 .. last(Y_FlocDrainValves)
        Local ←
            if EN_PlantDrains == 0
                stack(Local, PipeSUBF([
                    -L_Sed - CouplingLength(ND_FlocValve) - T_PlantWall - TotalFloc_Dim[0];
                    Y_FlocDrainValves[i];
                    Floc_Origin[2]
                ], T_PlantWall + SocketDepth(ND_FlocValve), [0; 0]*deg, ND_FlocValve, PS_Default, ["FlocTankCon"]))
            otherwise
                stack(Local, PipeSUBF([
                    Plant_Origin[0] + max(T_PlantWall, CouplingLength(ND_FlocValve)) - T_PlantWall - TotalFloc_Dim[0];
                    Y_FlocDrainValves[i];
                    Floc_Origin[2]
                ], max(T_PlantWall - CouplingLength(ND_FlocValve), 0 m) + 2*SocketDepth(ND_FlocValve), [0; 0]*deg, ND_FlocValve, PS_Default, ["FlocTankCon"]))
    return stack(Local, FreezeLayer("FlocDrainPipePlu"))
FlocDrainAdapterLayer := layer_new("FlocDrainAdapterPlu", red)
DrawFlocDrainAdapter1 :=
    MaleAdapterF([-L_Sed - CouplingLength(ND_FlocValve) - T_PlantWall; Y_FlocDrainValves[0]; Floc_Origin[2]], [0; 0]*deg, ND_FlocValve, PS_Default) if EN_PlantDrains == 0
    MaleAdapterF(FlocAdapter1_Origin, [180; 0]*deg, ND_FlocValve, PS_Default) otherwise
DrawFlocDrainAdapter2 := MaleAdapterF(FlocAdapter2_Origin, [0; 0]*deg, ND_FlocValve, PS_Default)
FlocTankDrainAdapterScript := stack(FlocDrainAdapterLayer, DrawFlocDrainAdapter1, DrawFlocDrainAdapter2, FreezeLayer("FlocDrainAdapterPlu"))
FlocDrainValveLayer := layer_new("FlocDrainValvePlu", blue3)
InsertFlocDrainValve := insertdwg("VAL-Scaled-Gate-Valve-Threaded", FlocValve_Origin, D_FlocScale, D_FlocScale, 0 deg)
FlocTankDrainValveScript := stack(FlocDrainValveLayer, InsertFlocDrainValve, FreezeLayer("FlocDrainValvePlu"))
# For this script to work, you need to modify the search path in AutoCAD everytime you want to test this on a different computer.  Go to tools->options the under search directory add a new file path.  Browse to find the Final Desgins Folder (or equivalent on a different sevrer).
# Iterates through the values of drain locations and inserts a valve
FlocDrainNippleLayer := layer_new("FlocDrainNipplePlu", blue)
DrawFlocDrainNipple := PipeF(FlocDrainNipple_Origin, 2*SocketDepth(ND_FlocValve), [0; 0]*deg, ND_FlocValve, PS_Default)
FlocDrainElbowLayer := layer_new("FlocDrainElbowPlu", green)
DrawFlocDrainElbow := ElbowF(FlocDrainNipple_Origin, [-90; 0; 225]*deg, ND_FlocValve, PS_Default)
FlocTankDrainRedirect := stack(FlocDrainNippleLayer, DrawFlocDrainNipple, FreezeLayer("FlocDrainNipplePlu"), FlocDrainElbowLayer, DrawFlocDrainElbow, FreezeLayer("FlocDrainElbowPlu"))
ThawFlocDrains := ThawMultiple(["FlocDrainAdapterPlu"; "FlocDrainValvePlu"; "FlocDrainNipplePlu"; "FlocDrainElbowPlu"])
ArrayFlocDrains := array_all(ceil(N_FlocChannels/2), 1, 2*(W_FlocChannel + T_PlantWall))
FreezeDrains := FreezeMultiple(["FlocDrainAdapterPlu"; "FlocDrainValvePlu"; "FlocDrainNipplePlu"; "FlocDrainElbowPlu"])
FlocDrainArray := stack(ThawFlocDrains, ArrayFlocDrains, FreezeDrains)
# Rapid Mix Coupling
FlocRMLayer := layer_new("FlocRMCouplingPlu", green)
DrawFlocRMCoupling := CouplingSUBF(FlocCoupling_Origin, [270; 0]*deg, ND_RMPipe, PS_Default, ["FlocTankCon"])  # FlocModPipeFrz
FreezeFlocRMCoupling := FreezeLayer("FlocRMCouplingPlu")
FlocRMCouplingScript := stack(FlocRMLayer, DrawFlocRMCoupling, FreezeFlocRMCoupling)
ThawMirrorTanks := ThawMultiple(["Floc*"; "*DrainChannel*"])
MirrorPlantTanks := Mirror3dAll("yz", [Plant_Origin[0] - L_Sed/2; Plant_Origin[1]], "y")
FreezeMirrorTanks := FreezeMultiple(["Floc*"; "Sed*"; "*DrainChannel*"])
FlipTanks := stack(ThawMirrorTanks, MirrorPlantTanks, FreezeMirrorTanks)
AC_FlocTank :=
    stack(FlocTankScript, FlocTankBaffleScriptH, FlocTankDrainCouplingScript, FlocTankDrainPipeScript, FlocTankDrainAdapterScript, FlocTankDrainValveScript, FlocTankDrainRedirect, FlocRMCouplingScript) if EN_FlocHoriz == 1 and N_FlocChannels ≤ 2
    stack(FlocTankScript, FlocTankBaffleScriptH, FlocTankDrainCouplingScript, FlocTankDrainPipeScript, FlocTankDrainAdapterScript, FlocTankDrainValveScript, FlocTankDrainRedirect, FlocDrainArray, FlocRMCouplingScript) if EN_FlocHoriz == 1 and N_FlocChannels > 2
    stack(FlocTankScript, FlocTankBaffleScriptV, FlocModules, FlocTankDrainCouplingScript, FlocTankDrainPipeScript, FlocTankDrainAdapterScript, FlocTankDrainValveScript, FlocTankDrainRedirect, FlocRMCouplingScript) if EN_FlocHoriz == 0 and N_FlocChannels ≤ 2
    stack(FlocTankScript, FlocTankBaffleScriptV, FlocModules, FlocTankDrainCouplingScript, FlocTankDrainPipeScript, FlocTankDrainAdapterScript, FlocTankDrainValveScript, FlocTankDrainRedirect, FlocDrainArray, FlocRMCouplingScript) otherwise
# [component: inputs AC_FlocTank]
