# Flocculator Drawing Low Flow (Single Channel)
S_FlocModEdgeToLastPipe := 10 cm
# Layers
FlocConLayer := layer_new("FlocTankCon", grey)
SelectFlocCon := SelectLayer("FlocTankCon")
FlocConFrz := FreezeLayer("FlocTankCon")
FlocDrainPipeLayer := layer_new("FlocDrainPipePlu", blue)
SelectFlocDrainPipe := SelectLayer("FlocDrainPipePlu")
FlocDrainPipeFrz := FreezeLayer("FlocDrainPipePlu")
FlocDrainFittingLayer := layer_new("FlocDrainFittingPlu", green)
SelectFlocDrainFitting := SelectLayer("FlocDrainFittingPlu")
FlocDrainFittingFrz := FreezeLayer("FlocDrainFittingPlu")
FlocDrainRemovableLayer := layer_new("FlocDrainRemovablePlu", red)
SelectFlocDrainRemovable := SelectLayer("FlocDrainRemovablePlu")
FlocDrainRemovableFrz := FreezeLayer("FlocDrainRemovablePlu")
FlocBaffleLayer := layer_new("FlocModBaffles", ltpurple)
SelectFlocBaffle := SelectLayer("FlocModBaffles")
FlocBaffleFrz := FreezeLayer("FlocModBaffles")
FlocModPipeLayer := layer_new("FlocModPipePlu", blue)
SelectFlocModPipe := SelectLayer("FlocModPipePlu")
FlocModPipeFrz := FreezeLayer("FlocModPipePlu")
FlocModSpacerLayer := layer_new("FlocModSpacerPlu", blue3)
SelectFlocModSpacer := SelectLayer("FlocModSpacerPlu")
FlocModSpacerFrz := FreezeLayer("FlocModSpacerPlu")
FlocModFittingLayer := layer_new("FlocModFittingPlu", green)
SelectFlocModFitting := SelectLayer("FlocModFittingPlu")
FlocModFittingFrz := FreezeLayer("FlocModFittingPlu")
FlocObsDownLayer := layer_new("FlocObsDownPipe", blue2)
SelectFlocObsDown := SelectLayer("FlocObsDownPipe")
FlocObsDownFrz := FreezeLayer("FlocObsDownPipe")
SubtractFromFlocObsDown := SubtractF(["FlocObsDownPipe"], "DeleteMe")
FlocObsUpLayer := layer_new("FlocObsUpPipe", blue2)
SelectFlocObsUp := SelectLayer("FlocObsUpPipe")
FlocObsUpFrz := FreezeLayer("FlocObsUpPipe")
SubtractFromFlocObsUp := SubtractF(["FlocObsUpPipe"], "DeleteMe")
# Flocculator masonry
Floc_Dim := [L_Floc; W_Floc; H_Floc]
Floc_Origin := Plant_Origin + [-L_Et - T_PlantWall; W_Sed + T_PlantWall; Z_FlocBottom]
FlocTank := Tank(Floc_Origin, Floc_Dim, T_PlantWall)
FlocEtWall := BoxF(Floc_Origin + [0 m; -T_PlantWall; -T_PlantWall], Floc_Origin + [T_PlantWall; W_Floc + T_PlantWall; H_Floc], [0; 0; 0]*deg)
SubtractFromFlocCon := SubtractF(["FlocTankCon"], "DeleteMe")
FlocConScript := stack(FlocConLayer, FlocTank, FlocConFrz, FlocEtWall, GroupDelete, SubtractFromFlocCon)
# Baffles (code for plate obstacles)
# Baffle origins and dimensions
FlocBaffleLow_Origin := Floc_Origin + [-S_FlocBaffle; 0 m; 0 m]
FlocBaffleLow_Dim := [-T_SedPlate; W_Floc; Z_FlocLowBaffleTop - FlocBaffleLow_Origin[2]]
FlocBaffleHigh_Origin := Floc_Origin + [-2*S_FlocBaffle - T_SedPlate; 0 m; S_FlocBaffle]
FlocBaffleHigh_Dim := [-T_SedPlate; W_Floc; Z_FlocTop - FlocBaffleHigh_Origin[2] - H_PlantFreeboard/2]
# Obstacle origins and dimensions
FlocObstacleUp1_Origin := FlocBaffleHigh_Origin + [-B_FlocBaffle; 0 m; S_FlocObstacle + L_FlocObstacleUp*cos(AN_FlocObs)]
FlocObstacleUp1_Dim := [L_FlocObstacleUp; W_Floc; -T_SedPlate]
FlocObstacleUp2_Origin := FlocBaffleHigh_Origin + [-T_SedPlate; 0 m; 2*S_FlocObstacle + L_FlocObstacleUp*cos(AN_FlocObs)]
FlocObstacleUp2_Dim := [-L_FlocObstacleUp; W_Floc; -T_SedPlate]
FlocObstacleDown1_Origin := [
    FlocBaffleLow_Origin[0] - B_FlocBaffle;
    FlocBaffleLow_Origin[1];
    Z_FlocLowBaffleTop - S_FlocObstacle + L_FlocObstacleDown*cos(AN_FlocObs)
]
FlocObstacleDown1_Dim := [L_FlocObstacleDown; W_Floc; -T_SedPlate]
FlocObstacleDown2_Origin := [
    FlocBaffleLow_Origin[0] - T_SedPlate;
    FlocBaffleLow_Origin[1];
    Z_FlocLowBaffleTop - 2*S_FlocObstacle + L_FlocObstacleDown*cos(AN_FlocObs)
]
FlocObstacleDown2_Dim := [-L_FlocObstacleDown; W_Floc; -T_SedPlate]
# Draw and array baffles
FlocBaffleLow := BoxF(FlocBaffleLow_Origin, FlocBaffleLow_Origin + FlocBaffleLow_Dim, [0; 0; 0]*deg)
ArrayLowBaffle := ArrayLast(1, (N_FlocBaffles + 1)/2, -2*B_FlocBaffle)
FlocBaffleHigh := BoxF(FlocBaffleHigh_Origin, FlocBaffleHigh_Origin + FlocBaffleHigh_Dim, [0; 0; 0]*deg)
ArrayHighBaffle := ArrayLast(1, (N_FlocBaffles - 1)/2, -2*B_FlocBaffle)
FlocBaffleScript := stack(FlocBaffleLayer, FlocBaffleLow, ArrayLowBaffle, FlocBaffleHigh, ArrayHighBaffle)
# Draw and array obstacles
FlocObsUp1Script :=
    local ← view("t")
    for i ∈ 0 .. ceil(N_FlocObstaclesPerSpace/2) - 1
        Obs ← BoxF(FlocObstacleUp1_Origin + [0 m; 0 m; 2*S_FlocObstacle*i], FlocObstacleUp1_Origin + FlocObstacleUp1_Dim + [0 m; 0 m; 2*S_FlocObstacle*i], [0; AN_FlocObs; 0])
        ArrayX ← ArrayLast(1, (N_FlocBaffles - 1)/2, -2*B_FlocBaffle)
        local ← stack(local, Obs, ArrayX)
    return local
FlocObsUp2Script :=
    local ← view("t")
    for i ∈ 0 .. floor(N_FlocObstaclesPerSpace/2) - 1
        Obs ← BoxF(FlocObstacleUp2_Origin + [0 m; 0 m; 2*S_FlocObstacle*i], FlocObstacleUp2_Origin + FlocObstacleUp2_Dim + [0 m; 0 m; 2*S_FlocObstacle*i], [0; -AN_FlocObs; 0])
        ArrayX ← ArrayLast(1, (N_FlocBaffles - 1)/2, -2*B_FlocBaffle)
        local ← stack(local, Obs, ArrayX)
    return local
FlocObsDown1Script :=
    local ← view("t")
    for i ∈ 0 .. ceil(N_FlocObstaclesPerSpace/2) - 1
        Obs ← BoxF(FlocObstacleDown1_Origin + [0 m; 0 m; -2*S_FlocObstacle*i], FlocObstacleDown1_Origin + FlocObstacleDown1_Dim + [0 m; 0 m; -2*S_FlocObstacle*i], [0; AN_FlocObs; 0])
        ArrayX ← ArrayLast(1, (N_FlocBaffles - 1)/2, -2*B_FlocBaffle)
        local ← stack(local, Obs, ArrayX)
    return local
FlocObsDown2Script :=
    local ← view("t")
    for i ∈ 0 .. floor(N_FlocObstaclesPerSpace/2) - 1
        Obs ← BoxF(FlocObstacleDown2_Origin + [0 m; 0 m; -2*S_FlocObstacle*i], FlocObstacleDown2_Origin + FlocObstacleDown2_Dim + [0 m; 0 m; -2*S_FlocObstacle*i], [0; -AN_FlocObs; 0])
        ArrayX ← ArrayLast(1, (N_FlocBaffles - 1)/2, -2*B_FlocBaffle)
        local ← stack(local, Obs, ArrayX)
    return local
FlocObstaclePlateScript := stack(FlocObsUp1Script, FlocObsUp2Script, FlocObsDown1Script, FlocObsDown2Script)
FlocLaminaScript := stack(FlocBaffleScript, FlocBaffleFrz)
# Half-pipe obstacles
# Origins
FlocObsPipeDraw_Origin := Floc_Origin
FlocObsDown1_Origin := FlocBaffleLow_Origin + [
    -B_FlocBaffle + W_FlocObstacleWake - outerradius(ND_FlocObs);
    0 m;
    H_FlocBaffleLow - S_FlocObstacle
]
FlocObsDown2_Origin := FlocBaffleLow_Origin + [
    -T_SedPlate - W_FlocObstacleWake + outerradius(ND_FlocObs);
    0 m;
    H_FlocBaffleLow - 2*S_FlocObstacle
]
FlocObsUp1_Origin := FlocBaffleLow_Origin + [
    -2*B_FlocBaffle + W_FlocObstacleWake - outerradius(ND_FlocObs);
    0 m;
    Pi_FlocBaffle*S_FlocBaffle + S_FlocObstacle
]
FlocObsUp2_Origin := FlocBaffleLow_Origin + [
    -B_FlocBaffle - T_SedPlate - W_FlocObstacleWake + outerradius(ND_FlocObs);
    0 m;
    Pi_FlocBaffle*S_FlocBaffle + 2*S_FlocObstacle
]
# Obstacles
FlocObsDown1Script :=
    local ← SelectFlocObsDown
    for i ∈ 0 .. ceil(N_FlocObstaclesPerSpace/2) - 1
        Origin ← FlocObsDown1_Origin + [0 m; 0 m; -i*2*S_FlocObstacle]
        Pipe ← PipeF(Origin, W_Floc, [-90; 0]*deg, ND_FlocObs, PS_Default)
        local ← stack(local, Pipe)
    local ← stack(local, FlocObsDownFrz)
    for i ∈ 0 .. ceil(N_FlocObstaclesPerSpace/2) - 1
        Origin ← FlocObsDown1_Origin + [0 m; 0 m; -i*2*S_FlocObstacle]
        Box ← BoxF(Origin + [-outerradius(ND_FlocObs); 0 m; -outerradius(ND_FlocObs)], Origin + [outerradius(ND_FlocObs) - W_FlocObstacleWake; W_Floc; outerradius(ND_FlocObs)], [0; 0; 0]*deg)
        local ← stack(local, Box)
    local ← stack(local, GroupDelete, SubtractFromFlocObsDown)
    return local
FlocObsDown2Script :=
    local ← SelectFlocObsDown
    for i ∈ 0 .. floor(N_FlocObstaclesPerSpace/2) - 1
        Origin ← FlocObsDown2_Origin + [0 m; 0 m; -i*2*S_FlocObstacle]
        Pipe ← PipeF(Origin, W_Floc, [-90; 0]*deg, ND_FlocObs, PS_Default)
        local ← stack(local, Pipe)
    local ← stack(local, FlocObsDownFrz)
    for i ∈ 0 .. floor(N_FlocObstaclesPerSpace/2) - 1
        Origin ← FlocObsDown2_Origin + [0 m; 0 m; -i*2*S_FlocObstacle]
        Box ← BoxF(Origin + [outerradius(ND_FlocObs); 0 m; -outerradius(ND_FlocObs)], Origin + [-outerradius(ND_FlocObs) + W_FlocObstacleWake; W_Floc; outerradius(ND_FlocObs)], [0; 0; 0]*deg)
        local ← stack(local, Box)
    local ← stack(local, GroupDelete, SubtractFromFlocObsDown)
    return local
FlocObsUp1Script :=
    local ← SelectFlocObsUp
    for i ∈ 0 .. ceil(N_FlocObstaclesPerSpace/2) - 1
        Origin ← FlocObsUp1_Origin + [0 m; 0 m; i*2*S_FlocObstacle]
        Pipe ← PipeF(Origin, W_Floc, [-90; 0]*deg, ND_FlocObs, PS_Default)
        local ← stack(local, Pipe)
    local ← stack(local, FlocObsUpFrz)
    for i ∈ 0 .. ceil(N_FlocObstaclesPerSpace/2) - 1
        Origin ← FlocObsUp1_Origin + [0 m; 0 m; i*2*S_FlocObstacle]
        Box ← BoxF(Origin + [-outerradius(ND_FlocObs); 0 m; -outerradius(ND_FlocObs)], Origin + [outerradius(ND_FlocObs) - W_FlocObstacleWake; W_Floc; outerradius(ND_FlocObs)], [0; 0; 0]*deg)
        local ← stack(local, Box)
    local ← stack(local, GroupDelete, SubtractFromFlocObsUp)
    return local
FlocObsUp2Script :=
    local ← SelectFlocObsUp
    for i ∈ 0 .. floor(N_FlocObstaclesPerSpace/2) - 1
        Origin ← FlocObsUp2_Origin + [0 m; 0 m; i*2*S_FlocObstacle]
        Pipe ← PipeF(Origin, W_Floc, [-90; 0]*deg, ND_FlocObs, PS_Default)
        local ← stack(local, Pipe)
    local ← stack(local, FlocObsUpFrz)
    for i ∈ 0 .. floor(N_FlocObstaclesPerSpace/2) - 1
        Origin ← FlocObsUp2_Origin + [0 m; 0 m; i*2*S_FlocObstacle]
        Box ← BoxF(Origin + [outerradius(ND_FlocObs); 0 m; -outerradius(ND_FlocObs)], Origin + [-outerradius(ND_FlocObs) + W_FlocObstacleWake; W_Floc; outerradius(ND_FlocObs)], [0; 0; 0]*deg)
        local ← stack(local, Box)
    local ← stack(local, GroupDelete, SubtractFromFlocObsUp)
    return local
ArrayFlocObsX := array_all(1, (N_FlocBaffles - 1)/2, -2*B_FlocBaffle)
ThawFlocObs := ThawMultiple(["FlocObs*"])
FreezeFlocObs := FreezeMultiple(["FlocObs*"])
FlocObstacleScript := stack(FlocObsDownLayer, FlocObsDownFrz, FlocObsDown1Script, FlocObsDown2Script, FlocObsUpLayer, FlocObsUpFrz, FlocObsUp1Script, FlocObsUp2Script, ThawFlocObs, ArrayFlocObsX, FreezeFlocObs)
# Module connectors and fittings
FlocModConnectorA_Origin := FlocBaffleLow_Origin + [
    SocketDepth(ND_FlocMod) + max(0 m, ShortTeeLength(ND_FlocMod) - ElbowRadius(ND_FlocMod));
    S_Fitting;
    Pi_FlocBaffle*S_FlocBaffle/2
]
L_FlocModConnectorA := L_Floc - (Floc_Origin[0] - FlocModConnectorA_Origin[0]) - ConRadius(ND_FlocMod) - ElbowRadius(ND_FlocMod)
FlocModConnectorB_Origin := FlocBaffleLow_Origin + [
    SocketDepth(ND_FlocMod) + max(0 m, ElbowRadius(ND_FlocMod) - ShortTeeLength(ND_FlocMod));
    S_Fitting;
    Pi_FlocBaffle*S_FlocBaffle + S_FlocObstacle
]
L_FlocModConnectorB := L_Floc - (Floc_Origin[0] - FlocModConnectorB_Origin[0]) - ConRadius(ND_FlocMod) - ShortTeeLength(ND_FlocMod)
FlocModConnectorC_Origin := FlocModConnectorA_Origin + [
    0 m;
    0 m;
    H_FlocBaffleLow + H_FlocBaffleHigh - S_FlocModEdgeToLastPipe - H_FlocBaffleOverlap - S_FlocBaffle*Pi_FlocBaffle/2
]
L_FlocModConnectorC := L_FlocModConnectorA
FlocModVertPipeA_Origin := FlocModConnectorA_Origin + [ElbowRadius(ND_FlocMod); 0 m; ElbowRadius(ND_FlocMod)]
L_FlocModVertPipeA := S_FlocBaffle*Pi_FlocBaffle/2 + S_FlocObstacle - TeeLength(ND_FlocMod)/2 - ElbowRadius(ND_FlocMod)
FlocModVertPipeB_Origin := FlocModConnectorB_Origin + [ShortTeeLength(ND_FlocMod); 0 m; TeeLength(ND_FlocMod)/2]
L_FlocModVertPipeB := S_FlocObstacle - TeeLength(ND_FlocMod)
FlocModVertPipeC_Origin := FlocModConnectorC_Origin + [ElbowRadius(ND_FlocMod); 0 m; -ElbowRadius(ND_FlocMod)]
L_FlocModVertPipeC := H_FlocBaffleHigh - H_FlocBaffleOverlap - S_FlocModEdgeToLastPipe + S_FlocObstacle - ElbowRadius(ND_FlocMod) - TeeLength(ND_FlocMod)/2
FlocModConnectorsA :=
    local ← SelectFlocModPipe
    for i ∈ 0 .. 2
        Pipe ← PipeSUBF(FlocModConnectorA_Origin + [0 m; i*(W_Floc - 2*S_Fitting)/2; 0 m], L_FlocModConnectorA, [0; 0]*deg, ND_FlocMod, PS_Modules, ["FlocModBaffles"])
        local ← stack(local, Pipe)
    local ← stack(local, FlocModPipeFrz)
FlocModConnectorsB :=
    local ← SelectFlocModPipe
    for j ∈ 0 .. N_FlocObstaclesPerSpace - 1
        for i ∈ 0 .. 2
            Pipe ← PipeSUBF(FlocModConnectorB_Origin + [0 m; i*(W_Floc - 2*S_Fitting)/2; j*S_FlocObstacle], L_FlocModConnectorB, [0; 0]*deg, ND_FlocMod, PS_Modules, ["FlocModBaffles"])
            local ← stack(local, Pipe)
    local ← stack(local, FlocModPipeFrz)
FlocModConnectorsC :=
    local ← SelectFlocModPipe
    for i ∈ 0 .. 2
        Pipe ← PipeSUBF(FlocModConnectorC_Origin + [0 m; i*(W_Floc - 2*S_Fitting)/2; 0 m], L_FlocModConnectorC, [0; 0]*deg, ND_FlocMod, PS_Modules, ["FlocModBaffles"])
        local ← stack(local, Pipe)
    local ← stack(local, FlocModPipeFrz)
ArrayFlocModY := ArrayLast(3, 1, (W_Floc - 2*S_Fitting)/2)
MirrorFlocModX := MirrorAll([FlocModConnectorA_Origin[0] - L_FlocModConnectorA/2; FlocModConnectorA_Origin[1]], [FlocModConnectorA_Origin[0] - L_FlocModConnectorA/2; FlocModConnectorA_Origin[1] + zc], "n")
FlocModVertPipeA := PipeF(FlocModVertPipeA_Origin, L_FlocModVertPipeA, [0; 90]*deg, ND_FlocMod, PS_Modules)
FlocModVertPipeB :=
    local ← view("t")
    for i ∈ 0 .. N_FlocObstaclesPerSpace - 2
        Pipe ← PipeF(FlocModVertPipeB_Origin + [0 m; 0 m; i*S_FlocObstacle], L_FlocModVertPipeB, [0; 90]*deg, ND_FlocMod, PS_Modules)
        local ← stack(local, Pipe, ArrayFlocModY)
    return local
FlocModVertPipeC := PipeF(FlocModVertPipeC_Origin, L_FlocModVertPipeC, [0; -90]*deg, ND_FlocMod, PS_Modules)
FlocModConnectorScript := stack(FlocModPipeLayer, FlocModVertPipeA, ArrayFlocModY, FlocModVertPipeB, FlocModVertPipeC, ArrayFlocModY, MirrorFlocModX, FlocModPipeFrz, FlocModConnectorsA, FlocModConnectorsB, FlocModConnectorsC)
FlocModElbow1_Origin := FlocModConnectorA_Origin
FlocModElbow2_Origin := FlocModConnectorC_Origin
FlocModTee_Origin := FlocModConnectorB_Origin
FlocModElbow1 := ElbowF(FlocModElbow1_Origin, [-90; 0; 90]*deg, ND_FlocMod, PS_Modules)
FlocModElbow2 := ElbowF(FlocModElbow2_Origin, [-90; 0; -90]*deg, ND_FlocMod, PS_Modules)
FlocModTees :=
    local ← view("t")
    for i ∈ 0 .. N_FlocObstaclesPerSpace - 1
        Tee ← TeeF(FlocModTee_Origin + [0 m; 0 m; i*S_FlocObstacle], [90; 0; 90]*deg, ND_FlocMod, PS_Modules)
        local ← stack(local, Tee, ArrayFlocModY)
    return local
FlocModFittingScript := stack(FlocModFittingLayer, FlocModElbow1, ArrayFlocModY, FlocModElbow2, ArrayFlocModY, FlocModTees, MirrorFlocModX, FlocModFittingFrz)
# Module spacers
# Bottom row
FlocModSpacerA1_Origin := FlocModConnectorA_Origin + [-SocketDepth(ND_FlocMod); 0 m; 0 m]
L_FlocModSpacerA1 := ShortTeeLength(ND_FlocMod) - ElbowRadius(ND_FlocMod)
FlocModSpacerA2_Origin := FlocModSpacerA1_Origin + [-L_FlocModSpacerA1 - T_SedPlate; 0 m; 0 m]
L_FlocModSpacerA2 := 2*S_FlocBaffle + T_SedPlate
FlocModSpacerA3_Origin := FlocModSpacerA1_Origin + [
    SocketDepth(ND_FlocMod) - L_FlocModConnectorA - ConRadius(ND_FlocMod) - ElbowRadius(ND_FlocMod) + S_Fitting + 2*ConRadius(ND_SedManifold);
    0 m;
    0 m
]
L_FlocModSpacerA3 := S_Fitting + 2*ConRadius(ND_SedManifold) - ConRadius(ND_FlocMod) - ElbowRadius(ND_FlocMod) - SocketDepth(ND_FlocMod)
# Top row
FlocModSpacerC1_Origin := FlocModSpacerA1_Origin + [0 m; 0 m; FlocModConnectorC_Origin[2] - FlocModConnectorA_Origin[2]]
L_FlocModSpacerC1 := L_FlocModSpacerA1 + B_FlocBaffle
FlocModSpacerC2_Origin := FlocModSpacerC1_Origin + [-L_FlocModSpacerC1 - T_SedPlate; 0 m; 0 m]
L_FlocModSpacerC2 := L_FlocModSpacerA2
FlocModSpacerC3_Origin := FlocModSpacerC1_Origin + [
    SocketDepth(ND_FlocMod) - L_FlocModConnectorC - ElbowRadius(ND_FlocMod) - ConRadius(ND_FlocMod) + S_Fitting + 2*ConRadius(ND_SedManifold) + B_FlocBaffle;
    0 m;
    0 m
]
L_FlocModSpacerC3 := B_FlocBaffle + S_Fitting + 2*ConRadius(ND_SedManifold) - ConRadius(ND_FlocMod) - ElbowRadius(ND_FlocMod) - SocketDepth(ND_FlocMod)
# Middle rows
FlocModSpacerB1Down_Origin := FlocModSpacerA2_Origin + [0 m; 0 m; -S_FlocBaffle*Pi_FlocBaffle/2 + H_FlocBaffleLow - S_FlocObstacle]
FlocModSpacerB1Up_Origin := FlocModSpacerC2_Origin + [0 m; 0 m; S_FlocModEdgeToLastPipe - H_FlocBaffleHigh + S_FlocObstacle]
L_FlocModSpacerB1 := S_FlocBaffle - W_FlocObstacleWake
FlocModSpacerB2_Origin := FlocModSpacerB1Down_Origin + [-(N_FlocBaffles - 1)*B_FlocBaffle; 0 m; 0 m]
L_FlocModSpacerB2 := S_Fitting + 2*ConRadius(ND_SedManifold) - ConRadius(ND_FlocMod) - ShortTeeLength(ND_FlocMod) - SocketDepth(ND_FlocMod)
# A and B spacer script
ArrayFlocModSpacerAB := array_all(1, (N_FlocBaffles - 1)/2, -2*B_FlocBaffle)
FlocModSpacerA2 := PipeF(FlocModSpacerA2_Origin, L_FlocModSpacerA2, [0; 0]*deg, ND_FlocSpacer, PS_Modules)
FlocModSpacerB1Down :=
    local ← view("t")
    for i ∈ 0 .. N_FlocObstaclesPerSpace - 1
        Pipe ← PipeF(FlocModSpacerB1Down_Origin + [-(mod(i, 2) == 1)*W_FlocObstacleWake; 0 m; -S_FlocObstacle*i], L_FlocModSpacerB1, [0; 0]*deg, ND_FlocSpacer, PS_Modules)
        local ← stack(local, Pipe, ArrayFlocModY)
    return local
FlocModSpacerB1Up :=
    local ← view("t")
    for i ∈ 0 .. N_FlocObstaclesPerSpace - 1
        Pipe ← PipeF(FlocModSpacerB1Up_Origin + [-(mod(i, 2) == 1)*W_FlocObstacleWake; 0 m; S_FlocObstacle*i], L_FlocModSpacerB1, [0; 0]*deg, ND_FlocSpacer, PS_Modules)
        local ← stack(local, Pipe, ArrayFlocModY)
    return local
FlocModSpacerA1 := PipeF(FlocModSpacerA1_Origin, L_FlocModSpacerA1, [0; 0]*deg, ND_FlocSpacer, PS_Modules)
FlocModSpacerA3 := PipeF(FlocModSpacerA3_Origin, L_FlocModSpacerA3, [0; 0]*deg, ND_FlocSpacer, PS_Modules)
FlocModSpacerB2 :=
    local ← view("t")
    for i ∈ 0 .. N_FlocObstaclesPerSpace - 1
        Pipe ← PipeF(FlocModSpacerB2_Origin + [0 m; 0 m; -S_FlocObstacle*i], L_FlocModSpacerB2, [0; 0]*deg, ND_FlocSpacer, PS_Modules)
        local ← stack(local, Pipe, ArrayFlocModY)
    return local
FlocModSpacerABScript := stack(FlocModSpacerLayer, FlocModSpacerA2, ArrayFlocModY, FlocModSpacerB1Down, FlocModSpacerB1Up, ArrayFlocModSpacerAB, FlocModSpacerA1, ArrayFlocModY, FlocModSpacerA3, ArrayFlocModY, FlocModSpacerB2, FlocModSpacerFrz)
# C spacer script (top row)
FlocModSpacerC1 := PipeF(FlocModSpacerC1_Origin, L_FlocModSpacerC1, [0; 0]*deg, ND_FlocSpacer, PS_Modules)
FlocModSpacerC3 := PipeF(FlocModSpacerC3_Origin, L_FlocModSpacerC3, [0; 0]*deg, ND_FlocSpacer, PS_Modules)
ArrayFlocModSpacerC := ArrayLast(1, (N_FlocBaffles - 3)/2, -2*B_FlocBaffle)
FlocModSpacerC2 :=
    local ← view("t")
    for i ∈ 0 .. 2
        Pipe ← PipeF(FlocModSpacerC2_Origin + [0 m; i*(W_Floc - 2*S_Fitting)/2; 0 m], L_FlocModSpacerC2, [0; 0]*deg, ND_FlocSpacer, PS_Modules)
        local ← stack(local, Pipe, ArrayFlocModSpacerC)
    return local
FlocModSpacerCScript := stack(SelectFlocModSpacer, FlocModSpacerC1, ArrayFlocModY, FlocModSpacerC3, ArrayFlocModY, FlocModSpacerC2, FlocModSpacerFrz)
FlocModSpacerScript := stack(FlocModSpacerABScript, FlocModSpacerCScript)
# Channel drain
FlocDrainCoupling_Origin := Floc_Origin + [-L_Floc + S_Fitting + ConRadius(ND_FlocDrain); 5*W_Floc/8; -SocketDepth(ND_FlocDrain)]
FlocDrainVertNipple_Origin := FlocDrainCoupling_Origin + [0 m; 0 m; -CouplingLength(ND_FlocDrain) + 2*SocketDepth(ND_FlocDrain)]
FlocDrainElbow_Origin := FlocDrainCoupling_Origin + [
    0 m;
    0 m;
    min(-CouplingLength(ND_FlocDrain), SocketDepth(ND_FlocDrain) - T_FlocSlab - ConRadius(ND_FlocDrain) + ElbowRadius(ND_FlocDrain))
]
FlocDrainHorizNipple_Origin := FlocDrainElbow_Origin + [-ElbowRadius(ND_FlocDrain); 0 m; -ElbowRadius(ND_FlocDrain)]
FlocDrainCoupling := CouplingSUBF(FlocDrainCoupling_Origin, [0; -90]*deg, ND_FlocDrain, PS_Default, ["FlocTankCon"])
FlocDrainVertNipple := PipeSUBF(FlocDrainVertNipple_Origin, FlocDrainVertNipple_Origin[2] - FlocDrainElbow_Origin[2], [0; -90]*deg, ND_FlocDrain, PS_Default, ["FlocTankCon"])
FlocDrainElbow := ElbowSUBF(FlocDrainElbow_Origin, [0; 0; -90]*deg, ND_FlocDrain, PS_Default, ["FlocTankCon"])
FlocDrainHorizNipple := PipeSUBF(FlocDrainHorizNipple_Origin, T_PlantWall + S_Fitting + ConRadius(ND_FlocDrain) - ElbowRadius(ND_FlocDrain), [0; 0]*deg, ND_FlocDrain, PS_Default, ["FlocTankCon"])
FlocDrainStub := PipeF(FlocDrainCoupling_Origin, Z_FlocDrainDumpStub - FlocDrainCoupling_Origin[2], [0; 90]*deg, ND_FlocDrain, PS_Default)
FlocDrainPlumbingScript := stack(FlocDrainPipeLayer, FlocDrainHorizNipple, FlocDrainVertNipple, FlocDrainPipeFrz, FlocDrainFittingLayer, FlocDrainElbow, FlocDrainCoupling, FlocDrainFittingFrz, FlocDrainRemovableLayer, FlocDrainStub, FlocDrainRemovableFrz)
AC_FlocTank := stack(FlocConScript, FlocDrainPlumbingScript, FlocLaminaScript, FlocObstacleScript, FlocModConnectorScript, FlocModFittingScript, FlocModSpacerScript)
