# [reference: MasterProgram.xmcd]
# Dimensions
framewall_dim := [-L_Sed; W_Sed; H_Sed]
framewall_subtdim := [-L_Sed + 2*T_PlantWall; W_Sed - 2*T_PlantWall; H_Sed] = [-6.19228; 0.7795; 2.1] m
Plant_Origin[1] = 0
# Origins
T_PlantWall = 0.15 m
framewall_origin :=
    for i ∈ 0 .. (N_SedTanks - 1)
        framewall_origin[0, i] ← [Plant_Origin[0]; Plant_Origin[1] + (framewall_dim[1] + T_PlantWall)*(i + 1); Plant_Origin[2]]
    return framewall_origin
framewall_subt :=
    for i ∈ 0 .. (N_SedTanks - 1)
        framewall_origin[0, i] ← [Plant_Origin[0] - T_PlantWall; Plant_Origin[1] + T_PlantWall*(i + 1); Plant_Origin[2]]
    return framewall_origin
framewall :=
    viewtop ← viewtop1
    for i ∈ 0 .. (N_SedTanks - 1)
        local ← stack(local, box(framewall_origin[0, i], framewall_origin[0, i] + framewall_dim), box(framewall_subt[0, i], framewall_subt[0, i] + framewall_subtdim))
        local
    return local
frame := framewall
# [component: inputs frame]
