# [reference: MasterProgram.xmcd]
laundercapscript(o, outerradiuspipe, innerradiuspipe, L_pipe, couplingsocketdepth, outerradiuscap, innerradiuscap, IH_cap, orificeradius) :=
    zoom ← zoom_win([o[0] - outerradiuspipe; o[1] + outerradiuspipe; o[2]], [o[0] + outerradiuspipe; o[1] - outerradiuspipe; o[2]])
    cylinder1 ← cylinderC(o, outerradiuspipe, L_pipe)
    cylinder2 ← cylinderC([o[0]; o[1]; o[2] - zc], innerradiuspipe, L_pipe + 2*zc)
    subtract1 ← subtractD([o[0] - outerradiuspipe; o[1]; o[2]], [o[0] - innerradiuspipe; o[1]; o[2]])
    union1 ← union_allA
    zoom ← zoom_win([o[0] - outerradiuscap; o[1] + outerradiuscap; o[2]], [o[0] + outerradiuscap; o[1] - outerradiuscap; o[2]])
    cylinder3 ← cylinderC([o[0]; o[1]; o[2] + couplingsocketdepth + zc], outerradiuscap, IH_cap)
    cylinder4 ← cylinderC([o[0]; o[1]; o[2] + couplingsocketdepth], innerradiuscap, IH_cap + 2*zc)
    zoom ← zoom_win([o[0] - outerradiuscap; o[1] + outerradiuscap; o[2]], [o[0] + outerradiuscap; o[1] - outerradiuscap; o[2]])
    subtract2 ← subtractD([o[0] - outerradiuscap; o[1]; o[2] + couplingsocketdepth], [o[0] - innerradiuscap; o[1]; o[2] + couplingsocketdepth])
    topcylinder ← cylinderC([o[0]; o[1]; (o[2] + couplingsocketdepth + IH_cap)], outerradiuscap, outerradiuscap - innerradiuscap)
    orificecylinder ← cylinderC([o[0]; o[1]; o[2] + couplingsocketdepth + IH_cap - zc], orificeradius, outerradiuscap - innerradiuscap + zc)
    subtract3 ← subtractD([o[0] - outerradiuscap; o[1]; o[2] + couplingsocketdepth + IH_cap], [o[0] - orificeradius; o[1]; o[2] + couplingsocketdepth + IH_cap - zc])
    union2 ← union_allA
    one ← stack(zoom, cylinder1, cylinder2, subtract1, union1, zoom, cylinder3, cylinder4, zoom, subtract2, topcylinder, orificecylinder, subtract3, union2)
    return one
laundercap(o, ID_pipe, D_CapOrifice, EN) := laundercapscript([o[0]; o[1]; o[2]], outerradius(NominalPipeSize(ID_pipe)), innerR(ID_pipe, EN), CapHeight(NominalPipeSize(ID_pipe)) - (CapDiameter(NominalPipeSize(ID_pipe))/2 - outerradius(NominalPipeSize(ID_pipe))) + SocketDepth(ID_pipe), SocketDepth(ID_pipe), CapDiameter(NominalPipeSize(ID_pipe))/2, outerradius(NominalPipeSize(ID_pipe)), CapHeight(NominalPipeSize(ID_pipe)) - (CapDiameter(NominalPipeSize(ID_pipe))/2 - outerradius(NominalPipeSize(ID_pipe))), D_CapOrifice/2)
# Control piece pipe is of the same size as the launder pipe
laundercap([0; 0; 0], 4 in, 1.4 in, 2) = [
    "_zoom w -0.06429,0.06429,0 0.06429,-0.06429,0";
    "_cylinder 0,0,0 0.05715 0.12923";
    "_cylinder 0,0,-0.01 0.05113 0.14923";
    "_subtract -0.05715,0,0  -0.05113,0,0 ";
    "_union all ";
    "_zoom w -0.06429,0.06429,0 0.06429,-0.06429,0";
    "_cylinder 0,0,0.067 0.06429 0.07223";
    "_cylinder 0,0,0.057 0.05715 0.09223";
    "_zoom w -0.06429,0.06429,0 0.06429,-0.06429,0";
    "_subtract -0.06429,0,0.057  -0.05715,0,0.057 ";
    "_cylinder 0,0,0.12923 0.06429 0.00714";
    "_cylinder 0,0,0.11923 0.01778 0.01714";
    "_subtract -0.06429,0,0.12923  -0.01778,0,0.11923 ";
    "_union all "
]
testlaundercap := laundercap([0; 0; 0], 4 in, 1.4 in, 2)
# [component: inputs testlaundercap]
