# [reference: MasterProgram.xmcd]
SedTankLayers :=
    if H_SedBetween == 0 or N_SedBays == 1
        [
            "channel";
            "tank";
            "bottomslopes";
            "echannel";
            "echanneltank";
            "lamina";
            "pipeframe";
            "connecting pipe";
            "ichanneltank";
            "WasteElbow";
            "draincover";
            "launder";
            "manifoldpipe";
            "manifoldelbow";
            "SedDrainCoupling";
            "SedDrainPipe";
            "SedDrainAdapter";
            "SedDrainValves";
            "laundercap";
            "sedweirinlet";
            "sedweirexit";
            "inletweirtee";
            "weirpipecap";
            "exitweirelbow";
            "exitweir";
            "inletweir";
            "wastepipe";
            "exitweirelbow";
            "inletpipe";
            "chimney stops";
            "iccoupling"
        ]
    otherwise
        [
            "channel";
            "tank";
            "bottomslopes";
            "echannel";
            "echanneltank";
            "lamina";
            "PipeFrameSupport";
            "PipeFrame";
            "PipeFrameStub";
            "connecting pipe";
            "ichanneltank";
            "WasteElbow";
            "draincover";
            "launder";
            "manifoldpipe";
            "manifoldelbow";
            "SedDrainCoupling";
            "SedDrainPipe";
            "SedDrainAdapter";
            "SedDrainValves";
            "laundercap";
            "sedweirinlet";
            "sedweirexit";
            "inletweirtee";
            "weirpipecap";
            "exitweirelbow";
            "exitweir";
            "inletweir";
            "wastepipe";
            "exitweirelbow";
            "inletpipe";
            "chimney stops";
            "iccoupling"
        ]
SedWithoutPSModules :=
    if H_SedBetween == 0 or N_SedBays == 1
        [
            "channel";
            "tank";
            "bottomslopes";
            "echannel";
            "echanneltank";
            "pipeframe support";
            "pipeframe";
            "connecting pipe";
            "ichanneltank";
            "WasteElbow";
            "draincover";
            "launder";
            "manifoldpipe";
            "manifoldelbow";
            "SedDrainCoupling";
            "SedDrainPipe";
            "SedDrainAdapter";
            "SedDrainValves";
            "laundercap";
            "sedweirinlet";
            "sedweirexit";
            "inletweirtee";
            "weirpipecap";
            "exitweirelbow";
            "exitweir";
            "inletweir";
            "wastepipe";
            "exitweirelbow";
            "inletpipe";
            "chimney stops";
            "iccoupling"
        ]
    otherwise
        [
            "channel";
            "tank";
            "bottomslopes";
            "echannel";
            "echanneltank";
            "PipeFrameSupport";
            "PipeFrame";
            "PipeFrameStub";
            "connecting pipe";
            "ichanneltank";
            "WasteElbow";
            "draincover";
            "launder";
            "manifoldpipe";
            "manifoldelbow";
            "SedDrainCoupling";
            "SedDrainPipe";
            "SedDrainAdapter";
            "SedDrainValves";
            "laundercap";
            "sedweirinlet";
            "sedweirexit";
            "inletweirtee";
            "weirpipecap";
            "exitweirelbow";
            "exitweir";
            "inletweir";
            "wastepipe";
            "exitweirelbow";
            "inletpipe";
            "chimney stops";
            "iccoupling"
        ]
FlocTankLayers := ["floctank"; "Baffle"; "FlocDrainCoupling"; "FlocDrainPipe"; "FlocDrainAdapter"; "FlocDrainValve"]
EntranceTankLayers := ["EntranceTank"; "EtHopper"; "EtDrainCouplings"; "EtDrainStoppers"; "RMPipe"; "RMElbow"; "RMTee"; "EtWeir"]
Dimension := layer_new("Dimension", purple)
SetDefaultLayer := layer_set("0")
TopView :=
    SetLayout1 ← concat("layout", sp, "s", sp)
    RenameLayout ← stack(concat("layout", sp, "r", sp), "TopView")
    SwitchSpace ← ".ms"
    FreezeText ← FreezeVPLayer("text")
    TopView ← viewtop1
    Zoom ← concat("z", sp, "o", sp, "all", sp)
    return stack(SetLayout1, RenameLayout, SwitchSpace, FreezeText, TopView, Zoom)
FrontView :=
    SetLayout2 ← concat("layout", sp, "s", sp, "layout2")
    RenameLayout ← stack(concat("layout", sp, "r", sp), "FrontView")
    SwitchSpace ← ".ms"
    FreezeText ← FreezeVPLayer("text")
    FrontView ← viewfront1
    Zoom ← concat("z", sp, "o", sp, "all", sp)
    return stack(SetLayout2, RenameLayout, SwitchSpace, FreezeText, FrontView, Zoom)
LeftView :=
    NewLayout ← concat("layout", sp, "n", sp, "LeftView")
    SetLayout ← concat("layout", sp, "s", sp, "LeftView")
    SwitchSpace ← ".ms"
    FreezeText ← FreezeVPLayer("text")
    LeftView ← viewleftside
    Zoom ← concat("z", sp, "o", sp, "all", sp)
    return stack(NewLayout, SetLayout, SwitchSpace, FreezeText, LeftView, Zoom)
RightView :=
    NewLayout ← concat("layout", sp, "n", sp, "RightView")
    SetLayout ← concat("layout", sp, "s", sp, "RightView")
    SwitchSpace ← ".ms"
    FreezeText ← FreezeVPLayer("text")
    RightView ← viewrightside1
    Zoom ← concat("z", sp, "o", sp, "all", sp)
    return stack(NewLayout, SetLayout, SwitchSpace, FreezeText, RightView, Zoom)
Et_Origin = [0; 10.4002; 0.719533] m
W_Sed = 1.08 m
TopViewEntrance :=
    NewLayout ← concat("layout", sp, "n", sp, "TopViewEntranceTank")
    SetLayout ← concat("layout", sp, "s", sp, "TopViewEntranceTank")
    SwitchSpace ← ".ms"
    FreezeText ← FreezeVPLayer("text")
    FreezeFloc ← FreezeVPMultiple(FlocTankLayers)
    FreezeTanks ← FreezeVPLayer("alumtanks")
    FreezeSed ← FreezeVPMultiple(SedTankLayers)
    TopView ← viewtop1
    DimLayer ← layer_set("Dimension")
    AddDim ← LinearDim(Et_Origin, W_Sed, "3", "Horizontal")
    Zoom ← concat("z", sp, "o", sp, "all", sp)
    return stack(NewLayout, SetLayout, SwitchSpace, FreezeText, FreezeFloc, FreezeTanks, FreezeSed, TopView, DimLayer, AddDim, SetDefaultLayer, Zoom)
RightViewEntrance :=
    NewLayout ← concat("layout", sp, "n", sp, "RightViewEntranceTank")
    SetLayout ← concat("layout", sp, "s", sp, "RightViewEntranceTank")
    SwitchSpace ← ".ms"
    FreezeText ← FreezeVPLayer("text")
    FreezeFloc ← FreezeVPMultiple(FlocTankLayers)
    FreezeTanks ← FreezeVPLayer("alumtanks")
    FreezeSed ← FreezeVPMultiple(SedTankLayers)
    RightView ← viewrightside1
    Zoom ← concat("z", sp, "o", sp, "all", sp)
    return stack(NewLayout, SetLayout, SwitchSpace, FreezeText, FreezeFloc, FreezeTanks, FreezeSed, RightView, Zoom)
LeftViewEntrance :=
    NewLayout ← concat("layout", sp, "n", sp, "LeftViewEntranceTank")
    SetLayout ← concat("layout", sp, "s", sp, "LeftViewEntranceTank")
    SwitchSpace ← ".ms"
    FreezeText ← FreezeVPLayer("text")
    FreezeFloc ← FreezeVPMultiple(FlocTankLayers)
    FreezeTanks ← FreezeVPLayer("alumtanks")
    FreezeSed ← FreezeVPMultiple(SedTankLayers)
    LeftView ← viewleftside
    Zoom ← concat("z", sp, "o", sp, "all", sp)
    return stack(NewLayout, SetLayout, SwitchSpace, FreezeText, FreezeFloc, FreezeTanks, FreezeSed, LeftView, Zoom)
FrontViewEntrance :=
    NewLayout ← concat("layout", sp, "n", sp, "FrontViewEntranceTank")
    SetLayout ← concat("layout", sp, "s", sp, "FrontViewEntranceTank")
    SwitchSpace ← ".ms"
    FreezeText ← FreezeVPLayer("text")
    FreezeFloc ← FreezeVPMultiple(FlocTankLayers)
    FreezeTanks ← FreezeVPLayer("alumtanks")
    FreezeSed ← FreezeVPMultiple(SedTankLayers)
    FrontView ← viewfront1
    Zoom ← concat("z", sp, "o", sp, "all", sp)
    return stack(NewLayout, SetLayout, SwitchSpace, FreezeText, FreezeFloc, FreezeTanks, FreezeSed, FrontView, Zoom)
TopViewFloc :=
    NewLayout ← concat("layout", sp, "n", sp, "TopViewFlocTank")
    SetLayout ← concat("layout", sp, "s", sp, "TopViewFlocTank")
    SwitchSpace ← ".ms"
    FreezeText ← FreezeVPLayer("text")
    FreezeEntrance ← FreezeVPMultiple(EntranceTankLayers)
    FreezeTanks ← FreezeVPLayer("alumtanks")
    FreezeSed ← FreezeVPMultiple(SedTankLayers)
    TopView ← viewtop1
    Zoom ← concat("z", sp, "o", sp, "all", sp)
    return stack(NewLayout, SetLayout, SwitchSpace, FreezeText, FreezeEntrance, FreezeTanks, FreezeSed, TopView, Zoom)
RightViewFloc :=
    NewLayout ← concat("layout", sp, "n", sp, "RightViewFlocTank")
    SetLayout ← concat("layout", sp, "s", sp, "RightViewFlocTank")
    SwitchSpace ← ".ms"
    FreezeText ← FreezeVPLayer("text")
    FreezeEntrance ← FreezeVPMultiple(EntranceTankLayers)
    FreezeTanks ← FreezeVPLayer("alumtanks")
    FreezeSed ← FreezeVPMultiple(SedTankLayers)
    RightView ← viewrightside1
    Zoom ← concat("z", sp, "o", sp, "all", sp)
    return stack(NewLayout, SetLayout, SwitchSpace, FreezeText, FreezeEntrance, FreezeTanks, FreezeSed, RightView, Zoom)
LeftViewFloc :=
    NewLayout ← concat("layout", sp, "n", sp, "LeftViewFlocTank")
    SetLayout ← concat("layout", sp, "s", sp, "LeftViewEntranceTank")
    SwitchSpace ← ".ms"
    FreezeText ← FreezeVPLayer("text")
    FreezeEntrance ← FreezeVPMultiple(EntranceTankLayers)
    FreezeTanks ← FreezeVPLayer("alumtanks")
    FreezeSed ← FreezeVPMultiple(SedTankLayers)
    LeftView ← viewleftside
    Zoom ← concat("z", sp, "o", sp, "all", sp)
    return stack(NewLayout, SetLayout, SwitchSpace, FreezeText, FreezeEntrance, FreezeTanks, FreezeSed, LeftView, Zoom)
.
FrontViewFloc :=
    NewLayout ← concat("layout", sp, "n", sp, "FrontViewFlocTank")
    SetLayout ← concat("layout", sp, "s", sp, "FrontViewFlocTank")
    SwitchSpace ← ".ms"
    FreezeText ← FreezeVPLayer("text")
    FreezeEntrance ← FreezeVPMultiple(EntranceTankLayers)
    FreezeTanks ← FreezeVPLayer("alumtanks")
    FreezeSed ← FreezeVPMultiple(SedTankLayers)
    FrontView ← viewfront1
    Zoom ← concat("z", sp, "o", sp, "all", sp)
    return stack(NewLayout, SetLayout, SwitchSpace, FreezeText, FreezeEntrance, FreezeTanks, FreezeSed, FrontView, Zoom)
TopViewSed :=
    NewLayout ← concat("layout", sp, "n", sp, "TopViewSedTank")
    SetLayout ← concat("layout", sp, "s", sp, "TopViewSedTank")
    SwitchSpace ← ".ms"
    FreezeText ← FreezeVPLayer("text")
    FreezeEntrance ← FreezeVPMultiple(EntranceTankLayers)
    FreezeTanks ← FreezeVPLayer("alumtanks")
    FreezeFloc ← FreezeVPMultiple(FlocTankLayers)
    TopView ← viewtop1
    DimLayer ← layer_set("Dimension")
    AddDim1 ← LinearDim(Plant_Origin, W_Sed, "-.9", "v")
    AddDim2 ← LinearDim(Plant_Origin, -L_Sed, "1.01", "h")
    AddDim3 ← LinearDim(echannel_origin, echannelbox_dim[1], "2", "v")
    AddDim4 ← LinearDim(echannel_origin, -echannelbox_dim[0], "1.5", "h")
    Zoom ← concat("z", sp, "o", sp, "all", sp)
    return stack(NewLayout, SetLayout, SwitchSpace, FreezeText, FreezeEntrance, FreezeTanks, FreezeFloc, TopView, DimLayer, AddDim1, AddDim2, AddDim3, AddDim4, SetDefaultLayer, Zoom)
    = [
        "layout n TopViewSedTank"; "layout s TopViewSedTank"; ".ms"; "vplayer f text"; "   "; "vplayer f EntranceTank"; "   f EtHopper"; "   f EtDrainCouplings"; "   f EtDrainStoppers"; "   f RMPipe"
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    ]
RightViewSed :=
    NewLayout ← concat("layout", sp, "n", sp, "RightViewSedTank")
    SetLayout ← concat("layout", sp, "s", sp, "RightViewSedTank")
    SwitchSpace ← ".ms"
    FreezeText ← FreezeVPLayer("text")
    FreezeEntrance ← FreezeVPMultiple(EntranceTankLayers)
    FreezeTanks ← FreezeVPLayer("alumtanks")
    FreezeFloc ← FreezeVPMultiple(FlocTankLayers)
    RightView ← viewrightside1
    Zoom ← concat("z", sp, "o", sp, "all", sp)
    return stack(NewLayout, SetLayout, SwitchSpace, FreezeText, FreezeEntrance, FreezeTanks, FreezeFloc, RightView, Zoom)
LeftViewSed :=
    NewLayout ← concat("layout", sp, "n", sp, "LeftViewSedTank")
    SetLayout ← concat("layout", sp, "s", sp, "LeftViewSedTank")
    SwitchSpace ← ".ms"
    FreezeText ← FreezeVPLayer("text")
    FreezeEntrance ← FreezeVPMultiple(EntranceTankLayers)
    FreezeTanks ← FreezeVPLayer("alumtanks")
    FreezeFloc ← FreezeVPMultiple(FlocTankLayers)
    LeftView ← viewleftside
    Zoom ← concat("z", sp, "o", sp, "all", sp)
    return stack(NewLayout, SetLayout, SwitchSpace, FreezeText, FreezeEntrance, FreezeTanks, FreezeFloc, LeftView, Zoom)
FrontViewSed :=
    NewLayout ← concat("layout", sp, "n", sp, "FrontViewSedTank")
    SetLayout ← concat("layout", sp, "s", sp, "FrontViewSedTank")
    SwitchSpace ← ".ms"
    FreezeText ← FreezeVPLayer("text")
    FreezeEntrance ← FreezeVPMultiple(EntranceTankLayers)
    FreezeTanks ← FreezeVPLayer("alumtanks")
    FreezeFloc ← FreezeVPMultiple(FlocTankLayers)
    FrontView ← viewfront1
    Zoom ← concat("z", sp, "o", sp, "all", sp)
    return stack(NewLayout, SetLayout, SwitchSpace, FreezeText, FreezeEntrance, FreezeTanks, FreezeFloc, FrontView, Zoom)
TopViewSedOp :=
    NewLayout ← concat("layout", sp, "n", sp, "TopViewSedOp")
    SetLayout ← concat("layout", sp, "s", sp, "TopViewSedOp")
    SwitchSpace ← ".ms"
    FreezeText ← FreezeVPLayer("text")
    FreezeEntrance ← FreezeVPMultiple(EntranceTankLayers)
    FreezeTanks ← FreezeVPLayer("alumtanks")
    FreezeFloc ← FreezeVPMultiple(FlocTankLayers)
    FreezeChimneyStops ← FreezeVPLayer("chimney stops")
    TopView ← viewtop1
    Zoom ← concat("z", sp, "o", sp, "all", sp)
    return stack(NewLayout, SetLayout, SwitchSpace, FreezeText, FreezeEntrance, FreezeTanks, FreezeFloc, FreezeChimneyStops, TopView, Zoom)
FrontViewSedOp :=
    NewLayout ← concat("layout", sp, "n", sp, "FrontViewSedOp")
    SetLayout ← concat("layout", sp, "s", sp, "FrontViewSedOp")
    SwitchSpace ← ".ms"
    FreezeText ← FreezeVPLayer("text")
    FreezeEntrance ← FreezeVPMultiple(EntranceTankLayers)
    FreezeTanks ← FreezeVPLayer("alumtanks")
    FreezeFloc ← FreezeVPMultiple(FlocTankLayers)
    FreezeChimneyStops ← FreezeVPLayer("chimney stops")
    FrontView ← viewfront1
    Zoom ← concat("z", sp, "o", sp, "all", sp)
    return stack(NewLayout, SetLayout, SwitchSpace, FreezeText, FreezeEntrance, FreezeTanks, FreezeFloc, FreezeChimneyStops, FrontView, Zoom)
RightViewSedOp :=
    NewLayout ← concat("layout", sp, "n", sp, "RightViewSedOp")
    SetLayout ← concat("layout", sp, "s", sp, "RightViewSedOp")
    SwitchSpace ← ".ms"
    FreezeText ← FreezeVPLayer("text")
    FreezeEntrance ← FreezeVPMultiple(EntranceTankLayers)
    FreezeTanks ← FreezeVPLayer("alumtanks")
    FreezeFloc ← FreezeVPMultiple(FlocTankLayers)
    FreezeChimneyStops ← FreezeVPLayer("chimney stops")
    RightView ← viewrightside1
    Zoom ← concat("z", sp, "o", sp, "all", sp)
    return stack(NewLayout, SetLayout, SwitchSpace, FreezeText, FreezeEntrance, FreezeTanks, FreezeFloc, FreezeChimneyStops, RightView, Zoom)
LeftViewSedOp :=
    NewLayout ← concat("layout", sp, "n", sp, "LeftViewSedOp")
    SetLayout ← concat("layout", sp, "s", sp, "LeftViewSedOp")
    SwitchSpace ← ".ms"
    FreezeText ← FreezeVPLayer("text")
    FreezeEntrance ← FreezeVPMultiple(EntranceTankLayers)
    FreezeTanks ← FreezeVPLayer("alumtanks")
    FreezeFloc ← FreezeVPMultiple(FlocTankLayers)
    FreezeChimneyStops ← FreezeVPLayer("chimney stops")
    LeftView ← viewleftside
    Zoom ← concat("z", sp, "o", sp, "all", sp)
    return stack(NewLayout, SetLayout, SwitchSpace, FreezeText, FreezeEntrance, FreezeTanks, FreezeFloc, FreezeChimneyStops, LeftView, Zoom)
TopViewSedRefill :=
    NewLayout ← concat("layout", sp, "n", sp, "TopViewSedRefill")
    SetLayout ← concat("layout", sp, "s", sp, "TopViewSedRefill")
    SwitchSpace ← ".ms"
    FreezeText ← FreezeVPLayer("text")
    FreezeEntrance ← FreezeVPMultiple(EntranceTankLayers)
    FreezeTanks ← FreezeVPLayer("alumtanks")
    FreezeFloc ← FreezeVPMultiple(FlocTankLayers)
    FreezeChimneyStops ← FreezeVPLayer("chimney stops")
    TopView ← viewtop1
    Zoom ← concat("z", sp, "o", sp, "all", sp)
    return stack(NewLayout, SetLayout, SwitchSpace, FreezeText, FreezeEntrance, FreezeTanks, FreezeFloc, FreezeChimneyStops, TopView, Zoom)
RightViewSedRefill :=
    NewLayout ← concat("layout", sp, "n", sp, "RightViewSedRefill")
    SetLayout ← concat("layout", sp, "s", sp, "RightViewSedRefill")
    SwitchSpace ← ".ms"
    FreezeText ← FreezeVPLayer("text")
    FreezeEntrance ← FreezeVPMultiple(EntranceTankLayers)
    FreezeTanks ← FreezeVPLayer("alumtanks")
    FreezeFloc ← FreezeVPMultiple(FlocTankLayers)
    FreezeChimneyStops ← FreezeVPLayer("chimney stops")
    RightView ← viewrightside1
    Zoom ← concat("z", sp, "o", sp, "all", sp)
    return stack(NewLayout, SetLayout, SwitchSpace, FreezeText, FreezeEntrance, FreezeTanks, FreezeFloc, FreezeChimneyStops, RightView, Zoom)
LeftViewSedRefill :=
    NewLayout ← concat("layout", sp, "n", sp, "LeftViewSedRefill")
    SetLayout ← concat("layout", sp, "s", sp, "LeftViewSedRefill")
    SwitchSpace ← ".ms"
    FreezeText ← FreezeVPLayer("text")
    FreezeEntrance ← FreezeVPMultiple(EntranceTankLayers)
    FreezeTanks ← FreezeVPLayer("alumtanks")
    FreezeFloc ← FreezeVPMultiple(FlocTankLayers)
    FreezeChimneyStops ← FreezeVPLayer("chimney stops")
    LeftView ← viewleftside
    Zoom ← concat("z", sp, "o", sp, "all", sp)
    return stack(NewLayout, SetLayout, SwitchSpace, FreezeText, FreezeEntrance, FreezeTanks, FreezeFloc, FreezeChimneyStops, LeftView, Zoom)
FrontViewSedRefill :=
    NewLayout ← concat("layout", sp, "n", sp, "FrontViewSedRefill")
    SetLayout ← concat("layout", sp, "s", sp, "FrontViewSedRefill")
    SwitchSpace ← ".ms"
    FreezeText ← FreezeVPLayer("text")
    FreezeEntrance ← FreezeVPMultiple(EntranceTankLayers)
    FreezeTanks ← FreezeVPLayer("alumtanks")
    FreezeFloc ← FreezeVPMultiple(FlocTankLayers)
    FreezeChimneyStops ← FreezeVPLayer("chimney stops")
    FrontView ← viewfront1
    Zoom ← concat("z", sp, "o", sp, "all", sp)
    return stack(NewLayout, SetLayout, SwitchSpace, FreezeText, FreezeEntrance, FreezeTanks, FreezeFloc, FreezeChimneyStops, FrontView, Zoom)
TopViewSedDrain :=
    NewLayout ← concat("layout", sp, "n", sp, "TopViewSedDrain")
    SetLayout ← concat("layout", sp, "s", sp, "TopViewSedDrain")
    SwitchSpace ← ".ms"
    FreezeText ← FreezeVPLayer("text")
    FreezeEntrance ← FreezeVPMultiple(EntranceTankLayers)
    FreezeTanks ← FreezeVPLayer("alumtanks")
    FreezeFloc ← FreezeVPMultiple(FlocTankLayers)
    TopView ← viewtop1
    Zoom ← concat("z", sp, "o", sp, "all", sp)
    return stack(NewLayout, SetLayout, SwitchSpace, FreezeText, FreezeEntrance, FreezeTanks, FreezeFloc, TopView, Zoom)
FrontViewSedDrain :=
    NewLayout ← concat("layout", sp, "n", sp, "FrontViewSedDrain")
    SetLayout ← concat("layout", sp, "s", sp, "FrontViewSedDrain")
    SwitchSpace ← ".ms"
    FreezeText ← FreezeVPLayer("text")
    FreezeEntrance ← FreezeVPMultiple(EntranceTankLayers)
    FreezeTanks ← FreezeVPLayer("alumtanks")
    FreezeFloc ← FreezeVPMultiple(FlocTankLayers)
    FrontView ← viewfront1
    Zoom ← concat("z", sp, "o", sp, "all", sp)
    return stack(NewLayout, SetLayout, SwitchSpace, FreezeText, FreezeEntrance, FreezeTanks, FreezeFloc, FrontView, Zoom)
RightViewSedDrain :=
    NewLayout ← concat("layout", sp, "n", sp, "RightViewSedDrain")
    SetLayout ← concat("layout", sp, "s", sp, "RightViewSedDrain")
    SwitchSpace ← ".ms"
    FreezeText ← FreezeVPLayer("text")
    FreezeEntrance ← FreezeVPMultiple(EntranceTankLayers)
    FreezeTanks ← FreezeVPLayer("alumtanks")
    FreezeFloc ← FreezeVPMultiple(FlocTankLayers)
    RightView ← viewrightside1
    Zoom ← concat("z", sp, "o", sp, "all", sp)
    return stack(NewLayout, SetLayout, SwitchSpace, FreezeText, FreezeEntrance, FreezeTanks, FreezeFloc, RightView, Zoom)
LeftViewSedDrain :=
    NewLayout ← concat("layout", sp, "n", sp, "LeftViewSedDrain")
    SetLayout ← concat("layout", sp, "s", sp, "LeftViewSedDrain")
    SwitchSpace ← ".ms"
    FreezeText ← FreezeVPLayer("text")
    FreezeEntrance ← FreezeVPMultiple(EntranceTankLayers)
    FreezeTanks ← FreezeVPLayer("alumtanks")
    FreezeFloc ← FreezeVPMultiple(FlocTankLayers)
    LeftView ← viewleftside
    Zoom ← concat("z", sp, "o", sp, "all", sp)
    return stack(NewLayout, SetLayout, SwitchSpace, FreezeText, FreezeEntrance, FreezeTanks, FreezeFloc, LeftView, Zoom)
TopViewPlateSettlerModule :=
    NewLayout ← concat("layout", sp, "n", sp, "TopViewPlateSettlerModule")
    SetLayout ← concat("layout", sp, "s", sp, "TopViewPlateSettlerModule")
    SwitchSpace ← ".ms"
    FreezeText ← FreezeVPLayer("text")
    FreezeEntrance ← FreezeVPMultiple(EntranceTankLayers)
    FreezeTanks ← FreezeVPLayer("alumtanks")
    FreezeFloc ← FreezeVPMultiple(FlocTankLayers)
    FreezeSed ← FreezeVPMultiple(SedWithoutPSModules)
    TopView ← viewtop1
    Zoom ← concat("z", sp, "o", sp, "all", sp)
    return stack(NewLayout, SetLayout, SwitchSpace, FreezeText, FreezeEntrance, FreezeTanks, FreezeFloc, FreezeSed, TopView, Zoom)
FrontViewPlateSettlerModule :=
    NewLayout ← concat("layout", sp, "n", sp, "FrontViewPlateSettlerModule")
    SetLayout ← concat("layout", sp, "s", sp, "FrontViewPlateSettlerModule")
    SwitchSpace ← ".ms"
    FreezeText ← FreezeVPLayer("text")
    FreezeEntrance ← FreezeVPMultiple(EntranceTankLayers)
    FreezeTanks ← FreezeVPLayer("alumtanks")
    FreezeFloc ← FreezeVPMultiple(FlocTankLayers)
    FreezeSed ← FreezeVPMultiple(SedWithoutPSModules)
    FrontView ← viewfront1
    Zoom ← concat("z", sp, "o", sp, "all", sp)
    return stack(NewLayout, SetLayout, SwitchSpace, FreezeText, FreezeEntrance, FreezeTanks, FreezeFloc, FreezeSed, FrontView, Zoom)
LeftViewPlateSettlerModule :=
    NewLayout ← concat("layout", sp, "n", sp, "LeftViewPlateSettlerModule")
    SetLayout ← concat("layout", sp, "s", sp, "LeftViewPlateSettlerModule")
    SwitchSpace ← ".ms"
    FreezeText ← FreezeVPLayer("text")
    FreezeEntrance ← FreezeVPMultiple(EntranceTankLayers)
    FreezeTanks ← FreezeVPLayer("alumtanks")
    FreezeFloc ← FreezeVPMultiple(FlocTankLayers)
    FreezeSed ← FreezeVPMultiple(SedWithoutPSModules)
    LeftView ← viewleftside
    Zoom ← concat("z", sp, "o", sp, "all", sp)
    return stack(NewLayout, SetLayout, SwitchSpace, FreezeText, FreezeEntrance, FreezeTanks, FreezeFloc, FreezeSed, LeftView, Zoom)
RightViewPlateSettlerModule :=
    NewLayout ← concat("layout", sp, "n", sp, "LeftViewPlateSettlerModule")
    SetLayout ← concat("layout", sp, "s", sp, "LeftViewPlateSettlerModule")
    SwitchSpace ← ".ms"
    FreezeText ← FreezeVPLayer("text")
    FreezeEntrance ← FreezeVPMultiple(EntranceTankLayers)
    FreezeTanks ← FreezeVPLayer("alumtanks")
    FreezeFloc ← FreezeVPMultiple(FlocTankLayers)
    FreezeSed ← FreezeVPMultiple(SedWithoutPSModules)
    RightView ← viewrightside1
    Zoom ← concat("z", sp, "o", sp, "all", sp)
    return stack(NewLayout, SetLayout, SwitchSpace, FreezeText, FreezeEntrance, FreezeTanks, FreezeFloc, FreezeSed, RightView, Zoom)
AC_Layout := stack("laythw", Dimension, SetDefaultLayer, TopViewSed, TopView, FrontView, RightView, TopViewEntrance, FrontViewEntrance, RightViewEntrance, TopViewFloc, FrontViewFloc, RightViewFloc, TopViewSedOp, FrontViewSedOp, RightViewSedOp, LeftViewSedOp, TopViewSedRefill, FrontViewSedRefill, RightViewSedRefill, LeftViewSedRefill, TopViewSedDrain, FrontViewSedDrain, RightViewSedDrain, LeftViewSedDrain, concat("layout", sp, "s", sp, "model", sp), concat("-view", sp, "_SEISO", sp))
