SedTankLayers :=
    if H_SedBetween == 0 or N_SedBays == 1
        [
            "channel";
            "tank";
            "bottomslopes";
            "echannel";
            "echanneltank";
            "lamina";
            "pipeframe";
            "connecting pipe";
            "ichanneltank";
            "WasteElbow";
            "draincover";
            "launder";
            "manifoldpipe";
            "manifoldelbow";
            "SedDrainCoupling";
            "SedDrainPipe";
            "SedDrainAdapter";
            "SedDrainValves";
            "launder cap";
            "sedweirinlet";
            "sedweirexit";
            "inletweirtee";
            "weirpipecap";
            "laundercouplingcap";
            "exitweirelbow";
            "exitweir";
            "launderorificecap";
            "launder coupling";
            "inletweir";
            "wastepipe";
            "exitweirelbow";
            "inletpipe";
            "chimney stops";
            "iccoupling"
        ]
    otherwise
        [
            "channel";
            "tank";
            "bottomslopes";
            "echannel";
            "echanneltank";
            "lamina";
            "pipeframe support";
            "pipeframe";
            "connecting pipe";
            "ichanneltank";
            "WasteElbow";
            "draincover";
            "launder";
            "manifoldpipe";
            "manifoldelbow";
            "SedDrainCoupling";
            "SedDrainPipe";
            "SedDrainAdapter";
            "SedDrainValves";
            "launder cap";
            "sedweirinlet";
            "sedweirexit";
            "inletweirtee";
            "weirpipecap";
            "laundercouplingcap";
            "exitweirelbow";
            "exitweir";
            "launderorificecap";
            "launder coupling";
            "inletweir";
            "wastepipe";
            "exitweirelbow";
            "inletpipe";
            "chimney stops";
            "iccoupling"
        ]
SedWithoutPSModules :=
    if H_SedBetween == 0 or N_SedBays == 1
        [
            "channel";
            "tank";
            "bottomslopes";
            "echannel";
            "echanneltank";
            "pipeframe support";
            "pipeframe";
            "connecting pipe";
            "ichanneltank";
            "WasteElbow";
            "draincover";
            "launder";
            "manifoldpipe";
            "manifoldelbow";
            "SedDrainCoupling";
            "SedDrainPipe";
            "SedDrainAdapter";
            "SedDrainValves";
            "launder cap";
            "sedweirinlet";
            "sedweirexit";
            "inletweirtee";
            "weirpipecap";
            "laundercouplingcap";
            "exitweirelbow";
            "exitweir";
            "launderorificecap";
            "launder coupling";
            "inletweir";
            "wastepipe";
            "exitweirelbow";
            "inletpipe";
            "chimney stops";
            "iccoupling"
        ]
    otherwise
        [
            "channel";
            "tank";
            "bottomslopes";
            "echannel";
            "echanneltank";
            "pipeframe support";
            "pipeframe";
            "connecting pipe";
            "ichanneltank";
            "WasteElbow";
            "draincover";
            "launder";
            "manifoldpipe";
            "manifoldelbow";
            "SedDrainCoupling";
            "SedDrainPipe";
            "SedDrainAdapter";
            "SedDrainValves";
            "launder cap";
            "sedweirinlet";
            "sedweirexit";
            "inletweirtee";
            "weirpipecap";
            "laundercouplingcap";
            "exitweirelbow";
            "exitweir";
            "launderorificecap";
            "launder coupling";
            "inletweir";
            "wastepipe";
            "exitweirelbow";
            "inletpipe";
            "chimney stops";
            "iccoupling"
        ]
FlocTankLayers := ["floctank"; "Baffle"; "FlocDrainCoupling"; "FlocDrainPipe"; "FlocDrainAdapter"; "FlocDrainValve"]
EntranceTankLayers := ["EntranceTank"; "EtHopper"; "EtDrainCouplings"; "EtDrainElbow"; "EtDrainPipes"; "EtDrainTees"; "RMPipe"; "RMElbow"; "RMTee"; "EtWeir"; "EtWeirElbow"]
IsometricView :=
    NewLayout ← concat("layout", sp, "s", sp)
    RenameLayout ← stack(concat("layout", sp, "r", sp), "IsometricView")
    SwitchSpace ← ".ms"
    FreezeText ← FreezeVPLayer("text")
    IsometricView ← viewisometric
    Zoom ← concat("z", sp, "o", sp, "all", sp)
    return stack(NewLayout, RenameLayout, SwitchSpace, FreezeText, IsometricView, Zoom)
TopView :=
    SetLayout1 ← concat("layout", sp, "s", sp)
    RenameLayout ← stack(concat("layout", sp, "r", sp), "TopView")
    SwitchSpace ← ".ms"
    FreezeText ← FreezeVPLayer("text")
    TopView ← viewtop1
    Zoom ← concat("z", sp, "o", sp, "all", sp)
    return stack(SetLayout1, RenameLayout, SwitchSpace, FreezeText, TopView, Zoom)
FrontView :=
    SetLayout2 ← concat("layout", sp, "s", sp, "layout2")
    RenameLayout ← stack(concat("layout", sp, "r", sp), "FrontView")
    SwitchSpace ← ".ms"
    FreezeText ← FreezeVPLayer("text")
    FrontView ← viewfront1
    Zoom ← concat("z", sp, "o", sp, "all", sp)
    return stack(SetLayout2, RenameLayout, SwitchSpace, FreezeText, FrontView, Zoom)
LeftView :=
    NewLayout ← concat("layout", sp, "n", sp, "LeftView")
    SetLayout ← concat("layout", sp, "s", sp, "LeftView")
    SwitchSpace ← ".ms"
    FreezeText ← FreezeVPLayer("text")
    LeftView ← viewleftside
    Zoom ← concat("z", sp, "o", sp, "all", sp)
    return stack(NewLayout, SetLayout, SwitchSpace, FreezeText, LeftView, Zoom)
RightView :=
    NewLayout ← concat("layout", sp, "n", sp, "RightView")
    SetLayout ← concat("layout", sp, "s", sp, "RightView")
    SwitchSpace ← ".ms"
    FreezeText ← FreezeVPLayer("text")
    RightView ← viewrightside1
    Zoom ← concat("z", sp, "o", sp, "all", sp)
    return stack(NewLayout, SetLayout, SwitchSpace, FreezeText, RightView, Zoom)
TopViewEntrance :=
    NewLayout ← concat("layout", sp, "n", sp, "TopViewEntranceTank")
    SetLayout ← concat("layout", sp, "s", sp, "TopViewEntranceTank")
    SwitchSpace ← ".ms"
    FreezeText ← FreezeVPLayer("text")
    FreezeFloc ← FreezeVPMultiple(FlocTankLayers)
    FreezeTanks ← FreezeVPLayer("alumtanks")
    FreezeSed ← FreezeVPMultiple(SedTankLayers)
    TopView ← viewtop1
    Zoom ← concat("z", sp, "o", sp, "all", sp)
    return stack(NewLayout, SetLayout, SwitchSpace, FreezeText, FreezeFloc, FreezeTanks, FreezeSed, TopView, Zoom)
RightViewEntrance :=
    NewLayout ← concat("layout", sp, "n", sp, "RightViewEntranceTank")
    SetLayout ← concat("layout", sp, "s", sp, "RightViewEntranceTank")
    SwitchSpace ← ".ms"
    FreezeText ← FreezeVPLayer("text")
    FreezeFloc ← FreezeVPMultiple(FlocTankLayers)
    FreezeTanks ← FreezeVPLayer("alumtanks")
    FreezeSed ← FreezeVPMultiple(SedTankLayers)
    RightView ← viewrightside1
    Zoom ← concat("z", sp, "o", sp, "all", sp)
    return stack(NewLayout, SetLayout, SwitchSpace, FreezeText, FreezeFloc, FreezeTanks, FreezeSed, RightView, Zoom)
LeftViewEntrance :=
    NewLayout ← concat("layout", sp, "n", sp, "LeftViewEntranceTank")
    SetLayout ← concat("layout", sp, "s", sp, "LeftViewEntranceTank")
    SwitchSpace ← ".ms"
    FreezeText ← FreezeVPLayer("text")
    FreezeFloc ← FreezeVPMultiple(FlocTankLayers)
    FreezeTanks ← FreezeVPLayer("alumtanks")
    FreezeSed ← FreezeVPMultiple(SedTankLayers)
    LeftView ← viewleftside
    Zoom ← concat("z", sp, "o", sp, "all", sp)
    return stack(NewLayout, SetLayout, SwitchSpace, FreezeText, FreezeFloc, FreezeTanks, FreezeSed, LeftView, Zoom)
FrontViewEntrance :=
    NewLayout ← concat("layout", sp, "n", sp, "FrontViewEntranceTank")
    SetLayout ← concat("layout", sp, "s", sp, "FrontViewEntranceTank")
    SwitchSpace ← ".ms"
    FreezeText ← FreezeVPLayer("text")
    FreezeFloc ← FreezeVPMultiple(FlocTankLayers)
    FreezeTanks ← FreezeVPLayer("alumtanks")
    FreezeSed ← FreezeVPMultiple(SedTankLayers)
    FrontView ← viewfront1
    Zoom ← concat("z", sp, "o", sp, "all", sp)
    return stack(NewLayout, SetLayout, SwitchSpace, FreezeText, FreezeFloc, FreezeTanks, FreezeSed, FrontView, Zoom)
TopViewFloc :=
    NewLayout ← concat("layout", sp, "n", sp, "TopViewFlocTank")
    SetLayout ← concat("layout", sp, "s", sp, "TopViewFlocTank")
    SwitchSpace ← ".ms"
    FreezeText ← FreezeVPLayer("text")
    FreezeEntrance ← FreezeVPMultiple(EntranceTankLayers)
    FreezeTanks ← FreezeVPLayer("alumtanks")
    FreezeSed ← FreezeVPMultiple(SedTankLayers)
    TopView ← viewtop1
    Zoom ← concat("z", sp, "o", sp, "all", sp)
    return stack(NewLayout, SetLayout, SwitchSpace, FreezeText, FreezeEntrance, FreezeTanks, FreezeSed, TopView, Zoom)
RightViewFloc :=
    NewLayout ← concat("layout", sp, "n", sp, "RightViewFlocTank")
    SetLayout ← concat("layout", sp, "s", sp, "RightViewFlocTank")
    SwitchSpace ← ".ms"
    FreezeText ← FreezeVPLayer("text")
    FreezeEntrance ← FreezeVPMultiple(EntranceTankLayers)
    FreezeTanks ← FreezeVPLayer("alumtanks")
    FreezeSed ← FreezeVPMultiple(SedTankLayers)
    RightView ← viewrightside1
    Zoom ← concat("z", sp, "o", sp, "all", sp)
    return stack(NewLayout, SetLayout, SwitchSpace, FreezeText, FreezeEntrance, FreezeTanks, FreezeSed, RightView, Zoom)
LeftViewFloc :=
    NewLayout ← concat("layout", sp, "n", sp, "LeftViewFlocTank")
    SetLayout ← concat("layout", sp, "s", sp, "LeftViewEntranceTank")
    SwitchSpace ← ".ms"
    FreezeText ← FreezeVPLayer("text")
    FreezeEntrance ← FreezeVPMultiple(EntranceTankLayers)
    FreezeTanks ← FreezeVPLayer("alumtanks")
    FreezeSed ← FreezeVPMultiple(SedTankLayers)
    LeftView ← viewleftside
    Zoom ← concat("z", sp, "o", sp, "all", sp)
    return stack(NewLayout, SetLayout, SwitchSpace, FreezeText, FreezeEntrance, FreezeTanks, FreezeSed, LeftView, Zoom)
.
FrontViewFloc :=
    NewLayout ← concat("layout", sp, "n", sp, "FrontViewFlocTank")
    SetLayout ← concat("layout", sp, "s", sp, "FrontViewFlocTank")
    SwitchSpace ← ".ms"
    FreezeText ← FreezeVPLayer("text")
    FreezeEntrance ← FreezeVPMultiple(EntranceTankLayers)
    FreezeTanks ← FreezeVPLayer("alumtanks")
    FreezeSed ← FreezeVPMultiple(SedTankLayers)
    FrontView ← viewfront1
    Zoom ← concat("z", sp, "o", sp, "all", sp)
    return stack(NewLayout, SetLayout, SwitchSpace, FreezeText, FreezeEntrance, FreezeTanks, FreezeSed, FrontView, Zoom)
TopViewSedOp :=
    NewLayout ← concat("layout", sp, "n", sp, "TopViewSedOp")
    SetLayout ← concat("layout", sp, "s", sp, "TopViewSedOp")
    SwitchSpace ← ".ms"
    FreezeText ← FreezeVPLayer("text")
    FreezeEntrance ← FreezeVPMultiple(EntranceTankLayers)
    FreezeTanks ← FreezeVPLayer("alumtanks")
    FreezeFloc ← FreezeVPMultiple(FlocTankLayers)
    FreezeChimneyStops ← FreezeVPLayer("chimney stops")
    FreezeLaunderCouplingCap ← FreezeVPLayer("laundercouplingcap")
    FreezeLaunderOrificeCap ← FreezeVPLayer("launderorificecap")
    TopView ← viewtop1
    Zoom ← concat("z", sp, "o", sp, "all", sp)
    return stack(NewLayout, SetLayout, SwitchSpace, FreezeText, FreezeEntrance, FreezeTanks, FreezeFloc, FreezeChimneyStops, FreezeLaunderCouplingCap, FreezeLaunderOrificeCap, TopView, Zoom)
TopViewSedRefill :=
    NewLayout ← concat("layout", sp, "n", sp, "TopViewSedRefill")
    SetLayout ← concat("layout", sp, "s", sp, "TopViewSedRefill")
    SwitchSpace ← ".ms"
    FreezeText ← FreezeVPLayer("text")
    FreezeEntrance ← FreezeVPMultiple(EntranceTankLayers)
    FreezeTanks ← FreezeVPLayer("alumtanks")
    FreezeFloc ← FreezeVPMultiple(FlocTankLayers)
    FreezeChimneyStops ← FreezeVPLayer("chimney stops")
    FreezeLaunderCouplingCap ← FreezeVPLayer("laundercouplingcap")
    TopView ← viewtop1
    Zoom ← concat("z", sp, "o", sp, "all", sp)
    return stack(NewLayout, SetLayout, SwitchSpace, FreezeText, FreezeEntrance, FreezeTanks, FreezeFloc, FreezeChimneyStops, FreezeLaunderCouplingCap, TopView, Zoom)
TopViewSedDrain :=
    NewLayout ← concat("layout", sp, "n", sp, "TopViewSedDrain")
    SetLayout ← concat("layout", sp, "s", sp, "TopViewSedDrain")
    SwitchSpace ← ".ms"
    FreezeText ← FreezeVPLayer("text")
    FreezeEntrance ← FreezeVPMultiple(EntranceTankLayers)
    FreezeTanks ← FreezeVPLayer("alumtanks")
    FreezeFloc ← FreezeVPMultiple(FlocTankLayers)
    FreezeLaunderOrificeCap ← FreezeVPLayer("launderorificecap")
    TopView ← viewtop1
    Zoom ← concat("z", sp, "o", sp, "all", sp)
    return stack(NewLayout, SetLayout, SwitchSpace, FreezeText, FreezeEntrance, FreezeTanks, FreezeFloc, FreezeLaunderOrificeCap, TopView, Zoom)
TopViewSed :=
    NewLayout ← concat("layout", sp, "n", sp, "TopViewSedTank")
    SetLayout ← concat("layout", sp, "s", sp, "TopViewSedTank")
    SwitchSpace ← ".ms"
    FreezeText ← FreezeVPLayer("text")
    FreezeEntrance ← FreezeVPMultiple(EntranceTankLayers)
    FreezeTanks ← FreezeVPLayer("alumtanks")
    FreezeFloc ← FreezeVPMultiple(FlocTankLayers)
    TopView ← viewtop1
    Zoom ← concat("z", sp, "o", sp, "all", sp)
    return stack(NewLayout, SetLayout, SwitchSpace, FreezeText, FreezeEntrance, FreezeTanks, FreezeFloc, TopView, Zoom)
RightViewSedDrain :=
    NewLayout ← concat("layout", sp, "n", sp, "RightViewSedDrain")
    SetLayout ← concat("layout", sp, "s", sp, "RightViewSedDrain")
    SwitchSpace ← ".ms"
    FreezeText ← FreezeVPLayer("text")
    FreezeEntrance ← FreezeVPMultiple(EntranceTankLayers)
    FreezeTanks ← FreezeVPLayer("alumtanks")
    FreezeFloc ← FreezeVPMultiple(FlocTankLayers)
    FreezeLaunderOrificeCap ← FreezeVPLayer("launderorificecap")
    RightView ← viewrightside1
    Zoom ← concat("z", sp, "o", sp, "all", sp)
    return stack(NewLayout, SetLayout, SwitchSpace, FreezeText, FreezeEntrance, FreezeTanks, FreezeFloc, FreezeLaunderOrificeCap, RightView, Zoom)
RightViewSedOp :=
    NewLayout ← concat("layout", sp, "n", sp, "RightViewSedOp")
    SetLayout ← concat("layout", sp, "s", sp, "RightViewSedOp")
    SwitchSpace ← ".ms"
    FreezeText ← FreezeVPLayer("text")
    FreezeEntrance ← FreezeVPMultiple(EntranceTankLayers)
    FreezeTanks ← FreezeVPLayer("alumtanks")
    FreezeFloc ← FreezeVPMultiple(FlocTankLayers)
    FreezeChimneyStops ← FreezeVPLayer("chimney stops")
    FreezeLaunderCouplingCap ← FreezeVPLayer("laundercouplingcap")
    FreezeLaunderOrificeCap ← FreezeVPLayer("launderorificecap")
    RightView ← viewrightside1
    Zoom ← concat("z", sp, "o", sp, "all", sp)
    return stack(NewLayout, SetLayout, SwitchSpace, FreezeText, FreezeEntrance, FreezeTanks, FreezeFloc, FreezeChimneyStops, FreezeLaunderCouplingCap, FreezeLaunderOrificeCap, RightView, Zoom)
RightViewSedRefill :=
    NewLayout ← concat("layout", sp, "n", sp, "RightViewSedRefill")
    SetLayout ← concat("layout", sp, "s", sp, "RightViewSedRefill")
    SwitchSpace ← ".ms"
    FreezeText ← FreezeVPLayer("text")
    FreezeEntrance ← FreezeVPMultiple(EntranceTankLayers)
    FreezeTanks ← FreezeVPLayer("alumtanks")
    FreezeFloc ← FreezeVPMultiple(FlocTankLayers)
    FreezeChimneyStops ← FreezeVPLayer("chimney stops")
    FreezeLaunderCouplingCap ← FreezeVPLayer("laundercouplingcap")
    RightView ← viewrightside1
    Zoom ← concat("z", sp, "o", sp, "all", sp)
    return stack(NewLayout, SetLayout, SwitchSpace, FreezeText, FreezeEntrance, FreezeTanks, FreezeFloc, FreezeChimneyStops, FreezeLaunderCouplingCap, RightView, Zoom)
RightViewSed :=
    NewLayout ← concat("layout", sp, "n", sp, "RightViewSedTank")
    SetLayout ← concat("layout", sp, "s", sp, "RightViewSedTank")
    SwitchSpace ← ".ms"
    FreezeText ← FreezeVPLayer("text")
    FreezeEntrance ← FreezeVPMultiple(EntranceTankLayers)
    FreezeTanks ← FreezeVPLayer("alumtanks")
    FreezeFloc ← FreezeVPMultiple(FlocTankLayers)
    RightView ← viewrightside1
    Zoom ← concat("z", sp, "o", sp, "all", sp)
    return stack(NewLayout, SetLayout, SwitchSpace, FreezeText, FreezeEntrance, FreezeTanks, FreezeFloc, RightView, Zoom)
LeftViewSedOp :=
    NewLayout ← concat("layout", sp, "n", sp, "LeftViewSedOp")
    SetLayout ← concat("layout", sp, "s", sp, "LeftViewSedOp")
    SwitchSpace ← ".ms"
    FreezeText ← FreezeVPLayer("text")
    FreezeEntrance ← FreezeVPMultiple(EntranceTankLayers)
    FreezeTanks ← FreezeVPLayer("alumtanks")
    FreezeFloc ← FreezeVPMultiple(FlocTankLayers)
    FreezeChimneyStops ← FreezeVPLayer("chimney stops")
    FreezeLaunderCouplingCap ← FreezeVPLayer("laundercouplingcap")
    FreezeLaunderOrificeCap ← FreezeVPLayer("launderorificecap")
    LeftView ← viewleftside
    Zoom ← concat("z", sp, "o", sp, "all", sp)
    return stack(NewLayout, SetLayout, SwitchSpace, FreezeText, FreezeEntrance, FreezeTanks, FreezeFloc, FreezeChimneyStops, FreezeLaunderCouplingCap, FreezeLaunderOrificeCap, LeftView, Zoom)
LeftViewSedRefill :=
    NewLayout ← concat("layout", sp, "n", sp, "LeftViewSedRefill")
    SetLayout ← concat("layout", sp, "s", sp, "LeftViewSedRefill")
    SwitchSpace ← ".ms"
    FreezeText ← FreezeVPLayer("text")
    FreezeEntrance ← FreezeVPMultiple(EntranceTankLayers)
    FreezeTanks ← FreezeVPLayer("alumtanks")
    FreezeFloc ← FreezeVPMultiple(FlocTankLayers)
    FreezeChimneyStops ← FreezeVPLayer("chimney stops")
    FreezeLaunderCouplingCap ← FreezeVPLayer("laundercouplingcap")
    LeftView ← viewleftside
    Zoom ← concat("z", sp, "o", sp, "all", sp)
    return stack(NewLayout, SetLayout, SwitchSpace, FreezeText, FreezeEntrance, FreezeTanks, FreezeFloc, FreezeChimneyStops, FreezeLaunderCouplingCap, LeftView, Zoom)
LeftViewSed :=
    NewLayout ← concat("layout", sp, "n", sp, "LeftViewSedTank")
    SetLayout ← concat("layout", sp, "s", sp, "LeftViewSedTank")
    SwitchSpace ← ".ms"
    FreezeText ← FreezeVPLayer("text")
    FreezeEntrance ← FreezeVPMultiple(EntranceTankLayers)
    FreezeTanks ← FreezeVPLayer("alumtanks")
    FreezeFloc ← FreezeVPMultiple(FlocTankLayers)
    LeftView ← viewleftside
    Zoom ← concat("z", sp, "o", sp, "all", sp)
    return stack(NewLayout, SetLayout, SwitchSpace, FreezeText, FreezeEntrance, FreezeTanks, FreezeFloc, LeftView, Zoom)
LeftViewSedDrain :=
    NewLayout ← concat("layout", sp, "n", sp, "LeftViewSedDrain")
    SetLayout ← concat("layout", sp, "s", sp, "LeftViewSedDrain")
    SwitchSpace ← ".ms"
    FreezeText ← FreezeVPLayer("text")
    FreezeEntrance ← FreezeVPMultiple(EntranceTankLayers)
    FreezeTanks ← FreezeVPLayer("alumtanks")
    FreezeFloc ← FreezeVPMultiple(FlocTankLayers)
    FreezeLaunderOrificeCap ← FreezeVPLayer("launderorificecap")
    LeftView ← viewleftside
    Zoom ← concat("z", sp, "o", sp, "all", sp)
    return stack(NewLayout, SetLayout, SwitchSpace, FreezeText, FreezeEntrance, FreezeTanks, FreezeFloc, FreezeLaunderOrificeCap, LeftView, Zoom)
FrontViewSed :=
    NewLayout ← concat("layout", sp, "n", sp, "FrontViewSedTank")
    SetLayout ← concat("layout", sp, "s", sp, "FrontViewSedTank")
    SwitchSpace ← ".ms"
    FreezeText ← FreezeVPLayer("text")
    FreezeEntrance ← FreezeVPMultiple(EntranceTankLayers)
    FreezeTanks ← FreezeVPLayer("alumtanks")
    FreezeFloc ← FreezeVPMultiple(FlocTankLayers)
    FrontView ← viewfront1
    Zoom ← concat("z", sp, "o", sp, "all", sp)
    return stack(NewLayout, SetLayout, SwitchSpace, FreezeText, FreezeEntrance, FreezeTanks, FreezeFloc, FrontView, Zoom)
FrontViewSedRefill :=
    NewLayout ← concat("layout", sp, "n", sp, "FrontViewSedRefill")
    SetLayout ← concat("layout", sp, "s", sp, "FrontViewSedRefill")
    SwitchSpace ← ".ms"
    FreezeText ← FreezeVPLayer("text")
    FreezeEntrance ← FreezeVPMultiple(EntranceTankLayers)
    FreezeTanks ← FreezeVPLayer("alumtanks")
    FreezeFloc ← FreezeVPMultiple(FlocTankLayers)
    FreezeChimneyStops ← FreezeVPLayer("chimney stops")
    FreezeLaunderCouplingCap ← FreezeVPLayer("laundercouplingcap")
    FrontView ← viewfront1
    Zoom ← concat("z", sp, "o", sp, "all", sp)
    return stack(NewLayout, SetLayout, SwitchSpace, FreezeText, FreezeEntrance, FreezeTanks, FreezeFloc, FreezeChimneyStops, FreezeLaunderCouplingCap, FrontView, Zoom)
FrontViewSedDrain :=
    NewLayout ← concat("layout", sp, "n", sp, "FrontViewSedDrain")
    SetLayout ← concat("layout", sp, "s", sp, "FrontViewSedDrain")
    SwitchSpace ← ".ms"
    FreezeText ← FreezeVPLayer("text")
    FreezeEntrance ← FreezeVPMultiple(EntranceTankLayers)
    FreezeTanks ← FreezeVPLayer("alumtanks")
    FreezeFloc ← FreezeVPMultiple(FlocTankLayers)
    FreezeLaunderOrificeCap ← FreezeVPLayer("launderorificecap")
    FrontView ← viewfront1
    Zoom ← concat("z", sp, "o", sp, "all", sp)
    return stack(NewLayout, SetLayout, SwitchSpace, FreezeText, FreezeEntrance, FreezeTanks, FreezeFloc, FreezeLaunderOrificeCap, FrontView, Zoom)
FrontViewSedOp :=
    NewLayout ← concat("layout", sp, "n", sp, "FrontViewSedOp")
    SetLayout ← concat("layout", sp, "s", sp, "FrontViewSedOp")
    SwitchSpace ← ".ms"
    FreezeText ← FreezeVPLayer("text")
    FreezeEntrance ← FreezeVPMultiple(EntranceTankLayers)
    FreezeTanks ← FreezeVPLayer("alumtanks")
    FreezeFloc ← FreezeVPMultiple(FlocTankLayers)
    FreezeChimneyStops ← FreezeVPLayer("chimney stops")
    FreezeLaunderCouplingCap ← FreezeVPLayer("laundercouplingcap")
    FreezeLaunderOrificeCap ← FreezeVPLayer("launderorificecap")
    FrontView ← viewfront1
    Zoom ← concat("z", sp, "o", sp, "all", sp)
    return stack(NewLayout, SetLayout, SwitchSpace, FreezeText, FreezeEntrance, FreezeTanks, FreezeFloc, FreezeChimneyStops, FreezeLaunderCouplingCap, FreezeLaunderOrificeCap, FrontView, Zoom)
TopViewPlateSettlerModule :=
    NewLayout ← concat("layout", sp, "n", sp, "TopViewPlateSettlerModule")
    SetLayout ← concat("layout", sp, "s", sp, "TopViewPlateSettlerModule")
    SwitchSpace ← ".ms"
    FreezeText ← FreezeVPLayer("text")
    FreezeEntrance ← FreezeVPMultiple(EntranceTankLayers)
    FreezeTanks ← FreezeVPLayer("alumtanks")
    FreezeFloc ← FreezeVPMultiple(FlocTankLayers)
    FreezeSed ← FreezeVPMultiple(SedWithoutPSModules)
    TopView ← viewtop1
    Zoom ← concat("z", sp, "o", sp, "all", sp)
    return stack(NewLayout, SetLayout, SwitchSpace, FreezeText, FreezeEntrance, FreezeTanks, FreezeFloc, FreezeSed, TopView, Zoom)
FrontViewPlateSettlerModule :=
    NewLayout ← concat("layout", sp, "n", sp, "FrontViewPlateSettlerModule")
    SetLayout ← concat("layout", sp, "s", sp, "FrontViewPlateSettlerModule")
    SwitchSpace ← ".ms"
    FreezeText ← FreezeVPLayer("text")
    FreezeEntrance ← FreezeVPMultiple(EntranceTankLayers)
    FreezeTanks ← FreezeVPLayer("alumtanks")
    FreezeFloc ← FreezeVPMultiple(FlocTankLayers)
    FreezeSed ← FreezeVPMultiple(SedWithoutPSModules)
    FrontView ← viewfront1
    Zoom ← concat("z", sp, "o", sp, "all", sp)
    return stack(NewLayout, SetLayout, SwitchSpace, FreezeText, FreezeEntrance, FreezeTanks, FreezeFloc, FreezeSed, FrontView, Zoom)
LeftViewPlateSettlerModule :=
    NewLayout ← concat("layout", sp, "n", sp, "LeftViewPlateSettlerModule")
    SetLayout ← concat("layout", sp, "s", sp, "LeftViewPlateSettlerModule")
    SwitchSpace ← ".ms"
    FreezeText ← FreezeVPLayer("text")
    FreezeEntrance ← FreezeVPMultiple(EntranceTankLayers)
    FreezeTanks ← FreezeVPLayer("alumtanks")
    FreezeFloc ← FreezeVPMultiple(FlocTankLayers)
    FreezeSed ← FreezeVPMultiple(SedWithoutPSModules)
    LeftView ← viewleftside
    Zoom ← concat("z", sp, "o", sp, "all", sp)
    return stack(NewLayout, SetLayout, SwitchSpace, FreezeText, FreezeEntrance, FreezeTanks, FreezeFloc, FreezeSed, LeftView, Zoom)
RightViewPlateSettlerModule :=
    NewLayout ← concat("layout", sp, "n", sp, "LeftViewPlateSettlerModule")
    SetLayout ← concat("layout", sp, "s", sp, "LeftViewPlateSettlerModule")
    SwitchSpace ← ".ms"
    FreezeText ← FreezeVPLayer("text")
    FreezeEntrance ← FreezeVPMultiple(EntranceTankLayers)
    FreezeTanks ← FreezeVPLayer("alumtanks")
    FreezeFloc ← FreezeVPMultiple(FlocTankLayers)
    FreezeSed ← FreezeVPMultiple(SedWithoutPSModules)
    RightView ← viewrightside1
    Zoom ← concat("z", sp, "o", sp, "all", sp)
    return stack(NewLayout, SetLayout, SwitchSpace, FreezeText, FreezeEntrance, FreezeTanks, FreezeFloc, FreezeSed, RightView, Zoom)
AC_Layout := stack("laythw", TopView, FrontView, RightView, TopViewEntrance, FrontViewEntrance, RightViewEntrance, TopViewFloc, FrontViewFloc, RightViewFloc, TopViewSedOp, RightViewSedOp, LeftViewSedOp, FrontViewSedOp, concat("layout", sp, "s", sp, "model"))
# [component: inputs AC_Layout]
