# Character
#
# Definition
#
# # (pound)
#
# Matches any numeric digit
#
# @ (at)
#
# Matches any alphabetic character
#
# . (period)
#
# Matches any nonalphanumeric character
#
# * (asterisk)
#
# Matches any string and can be used anywhere in the search string
#
# ? (question mark)
#
# Matches any single character; for example, ?BC matches ABC, 3BC, and so on
#
# ~ (tilde)
#
# Matches anything but the pattern; for example; ~*AB*matches all strings that don't contain AB
#
# [ ]
#
# Matches any one of the characters enclosed; for example, [AB]C matches AC and BC
#
# [~]
#
# Matches any character not enclosed; for example, [~AB]C matches XC but not AC
#
# [-]
#
# Specifies a range for a single character; for example, [A-G]C matches AC, BC, and so on to GC, but not HC
#
# ` (reverse quote)
#
# Reads the next character literally; for example, `~AB matches ~AB
#
# NoteTo filter on a layer name that contains a wild-card character, precede the character with a reverse quote (`) so that it is not interpreted as a wild-card character.
# Available Paper Sizes:
# "User 1 (1115.00 x 1723.00 Pixels)"
# "User 1 (1723.00 x 1115.00 Pixels)"
# "User 1 (1576.00 x 1218.00 Pixels)"
# "User 1 (1218.00 x 1576.00 Pixels)"
# "User 1 (1131.00 x 1697.00 Pixels)"
# "User 1 (1697.00 x 1131.00 Pixels)"
# "User 1 (1200.00 x 1600.00 Pixels)"
# "User 1 (1600.00 x 1200.00 Pixels)"
# "User 1 (1640.00 x 1171.00 Pixels)"
# "User 1 (1171.00 x 1640.00 Pixels)"
# "User 1 (1165.00 x 1648.00 Pixels)"
# "User 1 (1648.00 x 1165.00 Pixels)"
# "User 1 (921.00 x 1423.00 Pixels)"
# "User 1 (1423.00 x 921.00 Pixels)"
# "User 1 (1302.00 x 1006.00 Pixels)"
# "User 1 (1006.00 x 1302.00 Pixels)"
# "User 1 (935.00 x 1402.00 Pixels)"
# "User 1 (1402.00 x 935.00 Pixels)"
# "User 1 (1322.00 x 991.00 Pixels)"
# "User 1 (991.00 x 1322.00 Pixels)"
# "User 1 (1355.00 x 968.00 Pixels)"
# "User 1 (968.00 x 1355.00 Pixels)"
# "User 1 (714.00 x 1103.00 Pixels)"
# "User 1 (1103.00 x 714.00 Pixels)"
# "User 1 (780.00 x 1009.00 Pixels)"
# "User 1 (1009.00 x 780.00 Pixels)"
# "User 1 (725.00 x 1087.00 Pixels)"
# "User 1 (1087.00 x 725.00 Pixels)"
# "User 1 (750.00 x 1050.00 Pixels)"
# "User 1 (1050.00 x 750.00 Pixels)"
# "User 1 (1055.00 x 746.00 Pixels)"
# "User 1 (746.00 x 1055.00 Pixels)"
# "User 1 (91.00 x 127.00 Pixels)"
# "User 1 (127.00 x 91.00 Pixels)"
# "User 1 (88.00 x 132.00 Pixels)"
# "User 1 (132.00 x 88.00 Pixels)"
# "User 1 (93.00 x 124.00 Pixels)"
# "User 1 (124.00 x 93.00 Pixels)"
# "User 1 (95.00 x 123.00 Pixels)"
# "User 1 (123.00 x 95.00 Pixels)"
# "User 1 (91.00 x 129.00 Pixels)"
# "User 1 (129.00 x 91.00 Pixels)"
# "User 1 (87.00 x 134.00 Pixels)"
# "User 1 (134.00 x 87.00 Pixels)"
# "User 1 (583.00 x 824.00 Pixels)"
# "User 1 (824.00 x 583.00 Pixels)"
# "User 1 (820.00 x 586.00 Pixels)"
# "User 1 (586.00 x 820.00 Pixels)"
# "User 1 (849.00 x 566.00 Pixels)"
# "User 1 (566.00 x 849.00 Pixels)"
# "User 1 (789.00 x 610.00 Pixels)"
# "User 1 (610.00 x 789.00 Pixels)"
# "User 1 (862.00 x 558.00 Pixels)"
# "User 1 (558.00 x 862.00 Pixels)"
# "User 1 (962.00 x 1362.00 Pixels)"
# "User 1 (1362.00 x 962.00 Pixels)"
# "Sun Hi-Res (1600.00 x 1280.00 Pixels)"
# "XGA Hi-Res (1600.00 x 1200.00 Pixels)"
# "Super XGA (1280.00 x 1024.00 Pixels)"
# "Sun Standard (1152.00 x 900.00 Pixels)"
# "XGA (1024.00 x 768.00 Pixels)"
# "Super VGA (800.00 x 600.00 Pixels)"
# "VGA (640.00 x 480.00 Pixels)"
# "Sun Hi-Res (1280.00 x 1600.00 Pixels)"
# "XGA Hi-Res (1200.00 x 1600.00 Pixels)"
# "Super XGA (1024.00 x 1280.00 Pixels)"
# "Sun Standard (900.00 x 1152.00 Pixels)"
# "XGA (768.00 x 1024.00 Pixels)"
# "Super VGA (600.00 x 800.00 Pixels)"
# "VGA (480.00 x 640.00 Pixels)"
# Sed layers - "Sed"
# Filter layers - "Fi"
# Floc Layers - "Floc"
# EntranceTank Layers - "Et"
# Cdc layers - "Cdc"
# rapid mix layers - "RM"
# coagulant tank layers - "Coag"
# chlorine tank layers - "Chlor"
# chemical tank layers - "Chem"
Size_Paper := "VGA (480.00 x 640.00 Pixels)"
# Orientation is either l for landscape or p for portrait
pixels := "F"  # f is for fit, but can specify arbitrary pixel size too
CreatePlot(PaperSize, Orientation, Pixels, Method, views) :=
    Local1 ← stack(concat("-plot", sp, "y", sp), "PublishToWeb PNG.pc3", PaperSize, concat(Orientation, sp, "n", sp, "e", sp, Pixels), "", concat(sp, "."))
    Local2 ← stack(concat("y", sp, sp, "[FILEPATH]", Method, "_", views), concat("n", sp, "y"))
    return stack(Local1, Local2)
CreateSeparatePlot(PaperSize, Orientation, Pixels, Method, Part, views) :=
    Local1 ← stack(concat("-plot", sp, "y", sp), "PublishToWeb PNG.pc3", PaperSize, concat(Orientation, sp, "n", sp, "e", sp, Pixels), "", concat(sp, "."))
    Local2 ← stack(concat("y", sp, sp, "[FILEPATH]", Method, Part, "_", views), concat("n", sp, "y"))
    return stack(Local1, Local2)
PreviewPNG(Method, PaperSize, Orientation, Pixels, views) :=
    Local ← "laythw"
    for i ∈ 0 .. last(views)
        Local ← stack(Local, view(views[i]), CreatePlot(PaperSize, Orientation, Pixels, Method, views[i]))
    return Local
PreviewSeparatePNG(Method, Part, LayerNames, PaperSize, Orientation, Pixels, views) :=
    Local ← stack(FreezeLayer("*"), SelectLayer(LayerNames), sp)
    for i ∈ 0 .. last(views)
        Local ← stack(Local, view(views[i]), CreateSeparatePlot(PaperSize, Orientation, Pixels, Method, Part, views[i]))
    return Local
# EtFlocSedFi
AI_EtFlocSedFi := PreviewPNG("EtFlocSedFi", "User 1 (824.00 x 583.00 Pixels)", "l", pixels, ["t"; "r"; "f"; "sw"])
AI_EtFlocSedFiEt := PreviewSeparatePNG("EtFlocSedFi", "Et", "Et*", "User 1 (824.00 x 583.00 Pixels)", "l", pixels, ["t"; "r"; "f"; "sw"])
AI_EtFlocSedFiCdc := PreviewSeparatePNG("EtFlocSedFi", "Cdc", "Cdc*", "User 1 (824.00 x 583.00 Pixels)", "l", pixels, ["t"; "r"; "f"; "sw"])
# Added 2/5/16 by mrf222
AI_EtFlocSedFiFloc := PreviewSeparatePNG("EtFlocSedFi", "Floc", "Floc*", "User 1 (824.00 x 583.00 Pixels)", "l", pixels, ["t"; "r"; "f"; "sw"])
AI_EtFlocSedFiSed := PreviewSeparatePNG("EtFlocSedFi", "Sed", "Sed*", "User 1 (824.00 x 583.00 Pixels)", "l", pixels, ["t"; "r"; "f"; "sw"])
AI_EtFlocSedFiFilter := PreviewSeparatePNG("EtFlocSedFi", "Filter", "Fi*", "User 1 (824.00 x 583.00 Pixels)", "l", pixels, ["t"; "r"; "f"; "sw"])
AI_EtFlocSedFiOp := PreviewSeparatePNG("EtFlocSedFi", "Operator", "Op*", "User 1 (824.00 x 583.00 Pixels)", "l", pixels, ["t"; "r"; "f"; "sw"])
AI_EtFlocSedFiIsoX := stack(concat("shademode", sp, "x"), PreviewSeparatePNG("EtFlocSedFi", "Full", "*", "User 1 (824.00 x 583.00 Pixels)", "l", pixels, ["se"]))
AI_Final := stack("-view", "swiso", Enter, "laythw", "-view", "o", "t")
# EtFlocSedFiLow
AI_EtFlocSedFiLow := PreviewPNG("EtFlocSedFiLow", "User 1 (824.00 x 583.00 Pixels)", "l", pixels, ["t"; "r"; "f"; "sw"])
AI_EtFlocSedFiLowEt := PreviewSeparatePNG("EtFlocSedFiLow", "Et", "Et*", "User 1 (824.00 x 583.00 Pixels)", "l", pixels, ["t"; "r"; "f"; "sw"])
AI_EtFlocSedFiLowCdc := PreviewSeparatePNG("EtFlocSedFiLow", "Cdc", "Cdc*", "User 1 (824.00 x 583.00 Pixels)", "l", pixels, ["t"; "r"; "f"; "sw"])
# Added 2/5/16 by mrf222
AI_EtFlocSedFiLowFloc := PreviewSeparatePNG("EtFlocSedFiLow", "Floc", "*Floc*", "User 1 (824.00 x 583.00 Pixels)", "l", pixels, ["t"; "r"; "f"; "sw"])
AI_EtFlocSedFiLowSed := PreviewSeparatePNG("EtFlocSedFiLow", "Sed", "*Sed*", "User 1 (824.00 x 583.00 Pixels)", "l", pixels, ["t"; "r"; "f"; "sw"])
AI_EtFlocSedFiLowFilter := PreviewSeparatePNG("EtFlocSedFiLow", "Filter", "Fi*", "User 1 (824.00 x 583.00 Pixels)", "l", pixels, ["t"; "r"; "f"; "sw"])
# Other methods
AI_Lfom := stack(PreviewPNG("LFOM", "VGA (640.00 x 480.00 Pixels)", "l", pixels, ["f"]), concat("shademode", sp, "x", sp, "-view", sp, "swiso"))
AI_LfomTemplate := stack(PreviewPNG("LFOMTemplate", Size_Paper, "l", pixels, ["t"]), concat("shademode", sp, "x", sp, "-view", sp, "swiso"))
AI_FlocTank := stack(PreviewPNG("Flocculator", "VGA (640.00 x 480.00 Pixels)", "l", pixels, ["t"; "r"; "f"; "sw"]), concat("shademode", sp, "x", sp, "-view", sp, "swiso"))
AI_SedTank := stack(PreviewPNG("SedTank", "VGA (640.00 x 480.00 Pixels)", "l", pixels, ["t"; "r"; "f"; "sw"]), concat("shademode", sp, "x", sp, "-view", sp, "swiso"))
AI_Et := stack(PreviewPNG("EntTank", "VGA (640.00 x 480.00 Pixels)", "l", pixels, ["t"; "r"; "f"; "sw"]), concat("shademode", sp, "x", sp, "-view", sp, "swiso"))
AI_Cdc := PreviewPNG("Cdc", "VGA (640.00 x 480.00 Pixels)", "l", pixels, ["t"; "r"; "f"; "sw"])
AI_Filter := PreviewPNG("SRSF", "VGA (640.00 x 480.00 Pixels)", "l", pixels, ["t"; "r"; "f"; "sw"])
