Q_Plant := 20*L/s
D_DrillEng :=
    i ← 0
    D_DrillEng[0] ← 1/32*in
    while D_DrillEng[i] ≤ 3/16*in - 1/128*in
        i ← i + 1
        D_DrillEng[i] ← D_DrillEng[i - 1] + 1/128*in
    while D_DrillEng[i] < 1 in - 1/16*in
        i ← i + 1
        D_DrillEng[i] ← D_DrillEng[i - 1] + 1/16*in
    while D_DrillEng[i] < 2 in
        i ← i + 1
        D_DrillEng[i] ← D_DrillEng[i - 1] + 1/4*in
    return D_DrillEng
D_DrillMet :=
    i ← 0
    D_DrillMet[0] ← 0.5 mm
    while D_DrillMet[i] ≤ 5 mm - 0.1 mm
        i ← i + 1
        D_DrillMet[i] ← D_DrillMet[i - 1] + 0.1 mm
    while D_DrillMet[i] < 20 mm
        i ← i + 1
        D_DrillMet[i] ← D_DrillMet[i - 1] + 1 mm
    while D_DrillMet[i] < 50 mm
        i ← i + 1
        D_DrillMet[i] ← D_DrillMet[i - 1] + 2 mm
    return D_DrillMet
HL_Lfom := .2 m
H_LfomSF := 5 cm
LFOM_Mod := 1
N_Lfom := 1
Country := 0
S_LfomOrificesMin := 5 mm
Language := 0
H_LfomFreefall := 5 cm
EN_DrillSeries := 0
Pi_Sutro := 0.1
Pi_Lfomorifice := 20
Π_Lfomorifice := 10
Π_LfomSafety := 1.5
HL_Nlfom := 40 cm
HL_CoagCdc := HL_Lfom
# [reference: MathFunctions.xmcd]
# [reference: PipeDatabase.xmcd]
# [reference: FluidsFunctions.xmcd]
D_Drill :=
    D_Drill ← D_DrillEng if EN_DrillSeries == 0
    D_Drill ← D_DrillMet otherwise
# [reference: LFOM.xmcd]
# [reference: MtoATranslators.xmcd]
# [reference: MtoATranslatorsWrapped.xmcd]
# [reference: PlumbingF.xmcd]
# LFOM AutoCAD
# LFOM Drawing
LFOM_Origin :=
    [RMElbow_Origin[0]; RMElbow_Origin[1] + ElbowRadius(ND_RMPipe); ZW_Et - HL_Flowmeasure] if LFOM_Mod == 0
    [0 m; 0 m; 0 m] if LFOM_Mod == 1
LfomLayer := layer_new("EtLfomPlu", blue)
RMVertPipeTop :=
    H_PlantFreeboard if LFOM_Mod == 0
    (0 m) if LFOM_Mod == 1
L_LfomPipe := HL_Lfom
RMVertPipeBottom :=
    (Z_EtTop - (RMElbow_Origin[2] + ElbowRadius(ND_RMPipe)) - HL_Lfom - H_PlantFreeboard) if LFOM_Mod == 0
    (0 m) if LFOM_Mod == 1
L_RMVertPipe := RMVertPipeTop + L_LfomPipe + RMVertPipeBottom
RMVertPipe := PipeSUBF([LFOM_Origin[0]; LFOM_Origin[1] - ElbowRadius(ND_RMPipe); LFOM_Origin[2] - L_RMVertPipe], L_RMVertPipe, [0; 90; 0]*deg, ND_RMPipe, PS_Default, ["EtCon"])
FreezeLfomLayer := FreezeLayer("EtLfomPlu")
SelectLfom := SelectLayer("EtLfomPlu")
LfomOrifices :=
    Local ← FreezeRMPipe
    for h ∈ 0 .. last(H_LfomOrifices)
        if N_LfomOrifices[h] ≠ 0
            Local ← stack(Local, CylinderF([LFOM_Origin[0]; LFOM_Origin[1]; LFOM_Origin[2] + H_LfomOrifices[h]], D_LfomOrifices/2, outerradius(ND_RMPipe) + zc, [
                90 deg + (asin(0.5*S_LfomOrificesMin/(2*outerradius(ND_RMPipe))) + asin(D_LfomOrifices/(2*outerradius(ND_RMPipe))))*(mod(h, 2) == 0);
                0 deg
            ]))
        Local ← stack(Local, ArrayLastPolar([LFOM_Origin[0]; LFOM_Origin[1]; LFOM_Origin[2] + H_LfomOrifices[h]], N_LfomOrifices[h], (N_LfomOrifices[h] - 1)*(2*asin(D_LfomOrifices/(2*outerradius(ND_RMPipe))) + 2*asin(S_LfomOrificesMin/(2*outerradius(ND_RMPipe)))))) if N_LfomOrifices[h] > 1
    return Local
SubtractRMPipeOrifices := SubtractF(["EtLfomPlu"], "DeleteMe")
AC_LFOM := stack(LfomLayer, RMVertPipe, FreezeLfomLayer, GroupAll("DeleteMe"), SubtractRMPipeOrifices, SelectRMPipes, LfomOrifices, GroupAll("DeleteMe"), SubtractRMPipeOrifices)
