InsertMaterialDrawing := insertdwg("MaterialsInsert", Plant_Origin, 1, 1, 0 deg)
doublespace := concat(sp, sp)
MatAssign(ApplyMaterial, ApplyLayers) := stack("-layer", "material", ApplyMaterial, ApplyLayers, doublespace)
ApplyCon := MatAssign("Flat - Polished Gray", "*con")
ApplyPipes := MatAssign("PVC - White", "*plu")
# Some objects are assigned one material first, then another one is assigned later and overrides the first assignment. For instance, the valves in the sedimentation tank are originally PVC becauase the layer name contains "plu" but then become metal because the layer name also contains "valve"
ApplyValve := MatAssign("Machined 02", "*valve*")
ApplyValveGrip := MatAssign("Smooth - Burnt Red", "*grip")
ApplyLamina := MatAssign("Transparent - Teal", "SedModLamella")
ApplyLaminaSupport := MatAssign("PVC - White", "SedPF*")
ApplyFlocPiping := MatAssign("PVC - White", "FlocModulePiping")
ApplyBaffles := MatAssign("Transparent - Teal", "FlocModBaffles")
ApplyTrashrack := MatAssign("Anodized - Gray Textured", "EtTrashrack")
ApplyCoagTanks := MatAssign("Textured - Royal Blue Matte", "CoagTanks")
ApplyCdcLeverArm := MatAssign("Brushed", "CdcLeverArm")
ApplyCdcLeverArmGrip := MatAssign("High Gloss - Burnt Red", "CdcLeverArmGrip")
ApplyScrews := MatAssign("Machined 02", "*Screw")
ApplyCdcLeverArmBracket := MatAssign("Machined 02", "CdcLeverArmBracket")
ApplyCdcChtTank := MatAssign("Transparent - White", "CdcChtTank")
ApplyCdcChtSupport := MatAssign("Machined 02", "CdcChtSupport")
ApplyCdcChtPipeClamp := MatAssign("Machined 02", "CdcChtPipeClamp")
ApplyCdcChtFloatValve := MatAssign("Smooth - Ivory", "CdcChtFloatValve")
ApplyCdcChtBarbedFitting := MatAssign("Smooth - Black", "CdcChtBarbedFitting")
# More coag elements
Test := stack(ApplyCon, ApplyPipes)
AC_MatApply :=
    stack(InsertMaterialDrawing) if EN_MatApply == 0
    stack(InsertMaterialDrawing, ApplyCon, ApplyPipes, ApplyValve, ApplyLamina, ApplyLaminaSupport, ApplyTrashrack, ApplyBaffles, ApplyCoagTanks, ApplyCdcLeverArm, ApplyCdcLeverArmGrip, ApplyScrews, ApplyCdcLeverArmBracket, ApplyCdcChtTank, ApplyCdcChtFloatValve, ApplyCdcChtPipeClamp, ApplyCdcChtBarbedFitting, ApplyCdcChtSupport) otherwise
