# Automated Design: AutoCAD: Basics
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# Colors
grey := [132; 132; 132]
ltgrey := [214; 214; 214]
dkgrey := [91; 91; 91]
blue := [0; 255; 255]
blue2 := [0; 191; 255]
blue3 := [0; 127; 255]
green := [0; 255; 0]
purple := [127; 0; 255]
ltpurple := [125; 0; 160]
red := [255; 0; 0]
yellow := [255; 255; 0]
# Using Numbers in Code
sp := " "
zc := .01 m
zc_point := [0; .1; 0]*m
stringit(x) := num2str(round(x/m, 5))
stringit_nounits(x) := num2str(round(x, 5))
point(pointarray) :=
    temp ← ""
    for i ∈ 0 .. (rows(pointarray) - 1)
        temp ← concat(temp, stringit(pointarray[i]))
        temp ← concat(temp, ",") if i < (rows(pointarray) - 1)
    temp
point_nounits(pointarray) :=
    temp ← ""
    for i ∈ 0 .. (rows(pointarray) - 1)
        temp ← concat(temp, stringit_nounits(pointarray[i]))
        temp ← concat(temp, ",") if i < (rows(pointarray) - 1)
    temp
# Views
viewtop1 := concat("_-view", sp, "o", sp, "t")
viewtop := concat("_-view", sp, "o", sp, "t", sp)  # channel, manifold, elbow, and sludge use viewtop
viewfront := concat("_-view", sp, "o", sp, "f", sp)
viewfront1 := concat("_-view", sp, "o", sp, "f")
viewrightside := concat("_-view", sp, "o", sp, "r", sp)
viewrightside1 := concat("_-view", sp, "o", sp, "r")
viewse := concat("-view", sp, "se")
viewleftside := concat("_-view", sp, "o", sp, "l")
# Cylinders | orientation specified
cylinderB(p1, R1, p2) :=
    concat("_cylinder", sp, point(p1[:, 0]), sp, stringit(R1), sp, "c", sp, point(p2[:, 0]), sp) if acad_version == 2004 or 2006
    concat("_cylinder", sp, point(p1[:, 0]), sp, stringit(R1), sp, "a", sp, point(p2[:, 0]), sp) if acad_version == 2007
    concat("_cylinder", sp, point(p1[:, 0]), sp, stringit(R1), sp, "a", sp, point(p2[:, 0]), sp) otherwise  # error: This variable is undefined.
# removed cylinder functions that specify length
cylinderD(p1, R1, p2) :=
    concat("_cylinder", sp, point(p1[:, 0]), sp, stringit(R1), sp, "c", sp, point(p2[:, 0])) if acad_version == 2004 or 2006
    concat("_cylinder", sp, point(p1[:, 0]), sp, stringit(R1), sp, "a", sp, point(p2[:, 0])) if acad_version == 2007
    concat("_cylinder", sp, point(p1[:, 0]), sp, stringit(R1), sp, "a", sp, point(p2[:, 0])) otherwise  # error: This variable is undefined.
# Unions
unionA(p1, p2) := concat("_union", sp, point(p1[:, 0]), sp, point(p2[:, 0]), sp, sp)
unionB(p1, p2, p3, p4) := concat("_union", sp, point(p1[:, 0]), sp, point(p2[:, 0]), sp, point(p3[:, 0]), sp, point(p4[:, 0]), sp, sp)
unionC(p1, p2) := concat("_union", sp, point(p1[:, 0]), sp, point(p2[:, 0]), sp)
union_all := concat("_union", sp, "all", sp, sp)
union_allA := concat("_union", sp, "all", sp)
# Subtractions
subtractA(p1, p2) := concat("_subtract", sp, point(p1[:, 0]), sp, sp, point(p2[:, 0]), sp, sp)
subtractB(p1, p2, p3) := concat("_subtract", sp, point(p1[:, 0]), sp, point(p2[:, 0]), sp, sp, point(p3[:, 0]), sp, sp)
subtractC(p1, p2, p3) := concat("_subtract", sp, point(p1[:, 0]), sp, sp, point(p2[:, 0]), sp, point(p3[:, 0]), sp)
subtractD(p1, p2) := concat("_subtract", sp, point(p1[:, 0]), sp, sp, point(p2[:, 0]), sp)
subtractDall(p1) := concat("_subtract", sp, point(p1[:, 0]), sp, sp, "all", sp)
subtractH(p1, p2, p3) := concat("_subtract", sp, point(p1[:, 0]), sp, sp, point(p2[:, 0]), sp, point(p3[:, 0]), sp)
subtractJ(p1, p2, p3, p4) := concat("_subtract", sp, point(p1[:, 0]), sp, point(p2[:, 0]), sp, point(p3[:, 0]), sp, sp, point(p4[:, 0]), sp)
subtractK(p1, p2, p3) := concat("_subtract", sp, point(p1[:, 0]), sp, point(p2[:, 0]), sp, sp, point(p3[:, 0]), sp)
# Mirrors
mirror3d(p1, p2) := concat("_mirror3d", sp, point(p1[:, 0]), sp, sp, "zx", sp, point(p2[:, 0]), sp, "n")
mirror3d_all(p2) := concat("_mirror3d", sp, "all", sp, sp, "zx", sp, point(p2[:, 0]), sp, "n")
mirror3dyz(p1, p2) := concat("_mirror3d", sp, point(p1[:, 0]), sp, sp, "yz", sp, point(p2[:, 0]), sp, "n")
mirror_all(p1, p2) := concat("_mirror", sp, "all", sp, sp, point(p1[:, 0]), sp, point(p2[:, 0]), sp)
mirror_allyes(p1, p2) := concat("_mirror", sp, "all", sp, sp, point(p1[:, 0]), sp, point(p2[:, 0]), sp, "y")
# Torus | orientation NOT specified
torus(p1, R1, R2) := concat("_torus", sp, point(p1[:, 0]), sp, stringit(R1), sp, stringit(R2), sp)
# Box
box(p1, p2) := concat("_box", sp, point(p1[:, 0]), sp, point(p2[:, 0]))
boxA(p1, p2) := concat("_box", sp, point(p1[:, 0]), sp, point(p2[:, 0]), sp)
# Zoom
zoom := concat("_zoom", sp, "e", sp)
zoomA := concat("_zoom", sp, "e")
zoom_win(p1, p2) := concat("_zoom", sp, "w", sp, point(p1[:, 0]), sp, point(p2[:, 0]))
zoom_wina(p1, p2) := concat("_zoom", sp, "w", sp, point(p1[:, 0]), sp, point(p2[:, 0]), sp)
# Union
bigunion_elbow(p1, p2, p3, R1, R2) := concat("_union", sp, point(p1[:, 0]), sp, "1", sp, "@", stringit(R1 + R2), "<45", sp, point(p2[:, 0]), sp, point(p3[:, 0]), sp)
bigunion(p1, p2, p3, p4) := concat("_union", sp, point(p1[:, 0]), sp, point(p2[:, 0]), sp, point(p3[:, 0]), sp, point(p4[:, 0]), sp, sp)
bigunionA(p1, p2, p3, p4) := concat("_union", sp, point(p1[:, 0]), sp, point(p2[:, 0]), sp, point(p3[:, 0]), sp, point(p4[:, 0]), sp)
# Copy | a
copyA(p1, p2, p3, p4) := concat("_copy", sp, point(p1[:, 0]), sp, sp, point(p2[:, 0]), sp, point(p3[:, 0]), sp, point(p4[:, 0]), sp)
copyB(p1, p2, p3) := concat("_copy", sp, point(p1[:, 0]), sp, sp, point(p2[:, 0]), sp, point(p3[:, 0]), sp)
copyC(p1, p2, p3, p4) := concat("_copy", sp, point(p1[:, 0]), sp, sp, point(p2[:, 0]), sp, "@", point(p3[:, 0]), sp, "@", point(p4[:, 0]), sp)
copyD(p1, p2, p3, p4, p5) := concat("_copy", sp, point(p1[:, 0]), sp, sp, point(p2[:, 0]), sp, "@", point(p3[:, 0]), sp, "@", point(p4[:, 0]), sp, "@", point(p5[:, 0]), sp)
copyDa(p1, p2, p3, p4, p5) := concat("_copy", sp, point(p1[:, 0]), sp, sp, point(p2[:, 0]), sp, point(p3[:, 0]), sp, point(p4[:, 0]), sp, point(p5[:, 0]), sp)
copyE(p1, p2, p3, p4, p5, p6) := concat("_copy", sp, point(p1[:, 0]), sp, sp, point(p2[:, 0]), sp, "@", point(p3[:, 0]), sp, "@", point(p4[:, 0]), sp, "@", point(p5[:, 0]), sp, "@", point(p6[:, 0]), sp)
copyF(p1, p2, p3) := concat("_copy", sp, point(p1[:, 0]), sp, sp, point(p2[:, 0]), sp, "@", point(p3[:, 0]), sp)
copyG(p1, p2, p3, p4) := concat("_copy", sp, point(p1[:, 0]), sp, point(p2[:, 0]), sp, sp, point(p3[:, 0]), sp, point(p4[:, 0]), sp)
copy_all(p1, p2) := concat("_copy", sp, "all", sp, sp, point(p1[:, 0]), sp, "@", point(p2[:, 0]), sp)
# Move
move(p1, p2, p3) := concat("_move", sp, point(p1[:, 0]), sp, sp, point(p2[:, 0]), sp, "@", point(p3[:, 0]))
move_all(p1, p2) := concat("_move", sp, "all", sp, sp, point(p1[:, 0]), sp, point(p2[:, 0]))
move_allD(p1) := concat("_move", sp, "all", sp, sp, "d", sp, point(p1[:, 0]))
# Array
array(p1, nrow, ncol, distorifice) := concat("-array", sp, point(p1[:, 0]), sp, sp, "R", sp, stringit_nounits(nrow), sp, stringit_nounits(ncol), sp, stringit(distorifice), sp)
arrayA(p1, p2, nitem, angle) := concat("-array", sp, point(p1[:, 0]), sp, sp, "P", sp, point(p2[:, 0]), sp, stringit_nounits(nitem), sp, stringit_nounits(angle), sp, "Y")
arrayB(p1, nrow, ncol, distorifice) := concat("-array", sp, point(p1[:, 0]), sp, sp, "R", sp, stringit_nounits(nrow), sp, stringit_nounits(ncol), sp, stringit(distorifice))
array2D(p1, p2, nrow, ncol, drow, dcol) := concat("-array", sp, point(p1[:, 0]), sp, point(p2[:, 0]), sp, sp, "R", sp, stringit_nounits(nrow), sp, stringit_nounits(ncol), sp, stringit(drow), sp, stringit(dcol))
array_all(nrow, ncol, dist) := concat("-array", sp, "all", sp, sp, "R", sp, stringit_nounits(nrow), sp, stringit_nounits(ncol), sp, stringit(dist))
# Rotate
rotate_3d(p1, p2, axis, ϕ) := concat("_rotate3d", sp, point(p1[:, 0]), sp, sp, axis, sp, point(p2[:, 0]), sp, stringit_nounits(ϕ))
rotate_3dA(p1, p2, p3, axis, ϕ) := concat("_rotate3d", sp, point(p1[:, 0]), sp, point(p2[:, 0]), sp, sp, axis, sp, point(p3[:, 0]), sp, stringit_nounits(ϕ))
rotate_3d1(p1, p2, axis, ϕ) := concat("_rotate3d", sp, point(p1[:, 0]), sp, sp, axis, sp, point(p2[:, 0]), sp, stringit_nounits(ϕ), sp)
rotate_3dAll(p1, axis, ϕ) := concat("_rotate3d", sp, "all", sp, sp, axis, sp, point(p1[:, 0]), sp, num2str(90 - ϕ/deg))
# Layer
layer_new(title, color) :=
    one ← concat("-layer", sp, "m", sp, title)
    two ← concat("c", sp, "t", sp, point_nounits(color[:, 0]))
    three ← concat(title)
    four ← concat(sp, sp)
    tot ← stack(one, two, three, four)
    return tot
layer_set(title) :=
    one ← concat("-layer", sp, "s", sp, title)
    two ← concat(sp, sp)
    tot ← stack(one, two)
    return tot
layer_new1(title, color) :=
    one ← concat("-layer", sp, "m", sp, title)
    two ← concat("c", sp, "c", sp, point_nounits(color[:, 0]))
    three ← concat(title)
    four ← concat(sp, sp)
    tot ← stack(one, two, three, four)
    return tot
layer_freeze(title) :=
    one ← concat("-layer", sp, "f", sp, title)
    two ← concat(sp, sp)
    tot ← stack(one, two)
    return tot
layer_thaw(title) :=
    one ← concat("-layer", sp, "t", sp, title)
    two ← concat(sp, sp)
    tot ← stack(one, two)
    return tot
# Pline
pline(p1, p2, p3) := concat("_pline", sp, point(p1[:, 0]), sp, point(p2[:, 0]), sp, point(p3[:, 0]), sp, point(p1[:, 0]), sp)
pline10(p1, p2, p3, p4, p5, p6, p7, p8, p9) := concat("_pline", sp, point(p1[:, 0]), sp, point(p2[:, 0]), sp, point(p3[:, 0]), sp, point(p4[:, 0]), sp, point(p5[:, 0]), sp, point(p6[:, 0]), sp, point(p7[:, 0]), sp, point(p8[:, 0]), sp, point(p9[:, 0]), sp, point(p1[:, 0]), sp)
# Extrude
extrudeA(p1, L, ataper) := concat("_extrude", sp, point(p1[:, 0]), sp, sp, stringit(L), sp, stringit(0), sp, sp)  # what is ataper???
extrude(p1, L) :=
    concat("_extrude", sp, point(p1[:, 0]), sp, sp, stringit(L), sp) if acad_version == 2006
    concat("_extrude", sp, point(p1[:, 0]), sp, sp, stringit(L)) if acad_version == 2008
    concat("_extrude", sp, point(p1[:, 0]), sp, sp, stringit(L)) otherwise  # error: This variable is undefined.
# Block
block(title, bp, ip) :=
    one ← concat("-block", sp, title)
    two ← concat(point(bp[:, 0]), sp, "all", sp)
    three ← concat("-insert", sp, title)
    four ← concat(point(ip[:, 0]), sp)
    five ← concat(sp)
    tot ← stack(one, two, three, four, five)
    return tot
# Slice
slice(p1, p2, kp) := concat("_slice", sp, point(p1[:, 0]), sp, sp, "o", sp, point(p2[:, 0]), sp, point(kp[:, 0]))
slice_both(p1, p2, kp) := concat("_slice", sp, point(p1[:, 0]), sp, sp, "o", sp, point(p2[:, 0]), sp, "b")
# Explode
explode(p1) := concat("_explode", sp, point(p1[:, 0]), sp)
# Erase
erase(p1) := concat("_erase", sp, point(p1[:, 0]), sp)
erase_all := concat("_erase", sp, "all", sp)
# Wedge
# does NOT specify orientation
wedge3d(p1, p2) := concat("_wedge", sp, point(p1[:, 0]), sp, point(p2[:, 0]))
# Miscellaneous
cleanscreen := concat("_CleanScreenON")
textbox(size, p1, p2, disclaimer) :=
    setsize ← concat("textsize", sp, stringit(size))
    one ← concat("-mtext", sp, point(p1[:, 0]), sp, point(p2[:, 0]), sp, disclaimer)
    two ← concat("")
    total ← stack(setsize, one, two)
    return total
# Insert Block
insertdwg(filepath, insertionpoint, scalefactor, AN_rotation) := stack(concat("-insert", sp, filepath), concat(point(insertionpoint[:, 0]), sp, stringit_nounits(scalefactor), sp, stringit_nounits(scalefactor), sp, stringit_nounits(AN_rotation)))
# Proposal:
# Naming Variables and functions
# Capitalize the first letter of each word in variables and functions.
#
# Functions that calculate a particular variable will have the same name as that variable, with the addition of an "F" at the end to indicate that it is a function.
# For instance, the function that calculates the number of baffle spaces for a vertical flocculator would be N.FlocBaffleSpacesF, which the variable that holds the number of baffle spaces would be N.FlocBaffleSpaces.
#
# existing conventions:
# "N" - number
# "AN" - angle
# "S" - space
# "T" - thickness
# "H" - height
# "L" - length
# "D" - diameter
# "B" - center-to-center distance between objects
# "W" - width
# "EN" - enumerated type
# Functions that draw plant elements (tees, elbows, etc)
# Without the ability to subtract objects by name, it is better to leave layer manipulation to the user. Imermediately before any element is drawn, the user will create his own layer for the element and thaw any necessary layers for subtraction. At the end the user must freeze all layers himself.
# If objects cannot be subtracted by name using only keyboard commands, selecting objects by a point becomes difficult at orientations that do not lie along the x, y, or z, axes. The following conventions will assume that it is enough to have elements that lie strictly on the primary axes, or that complex rotation of objects will not require subtractions, and thus will not require a point to select it.
# These functions will take all necessary dimensions and orientations required to fully define the element. This will allow view changes to be hidden in function calls.
# These functions are often functions of other functions. The final function that is available to the user should be named whatever the plant element is with an "F" at the end to indicate that it is the final function to be used.
# coupling
CouplingF(Origin, EndPt, SubtractPt, ND_Pipe, EN_PipeSpec)
# The orientation of the function is built in by defining an origin and end point. Each point will be the at the edge of the socket and the center of the circle defined by the socket. This function allows the coupling to be drawn to an arbitrary length which is not entirely realistic. The socket and pipe lengths will still be realistically proportional (the pipe part will be twice as long as the socket part).
#
# Currently, the coupling takes a layer as an input in addition to a point on the wall from which it must subtract. To keep this function consistent with other functions, the layer input should be removed, and the user should thaw the necessary layer before executing the function. The subtraction of the coupling from the wall should still occur within the function, and SubtractPt will select the wall from which the coupling must subtract.
# male adapter
MaleAdapterF(Origin, EndPt, SubtractPt, ND_Pipe, EN_PipeSpec)
# The Origin of the male adapter will occur at the edge of the socket at the center of the circle defined by the socket. The EndPt will define the edge of the slip side and the center of the circle defined by the pipe at the slip side.
#
# Like the coupling script, the subtraction should still occur in the function using the SubtractPt. The thawing of the wall layer should be done by the user to keep consistent with other functions.
# cross
crossF(Origin, ND_Pipe, EN_PipeSpec, Plane, RotationAngle)
# The Origin of the cross occurs at the center (intersection) of the two pipes. The plane is given by a single point. The point will contain a "0" where the axis perpendicular to the plane lies and "1" everywhere else. Allowable inputs to plane are as follows:
[0; 1; 1]  # indicates that it lies in the yz plane
[1; 0; 1]  # indicates that it lies in the xz plane
[1; 1; 0]  # indicates that it lies in the xy plane
# The RotationAngle allows the cross to be rotated in the indicated plane.
# elbow
elbowF(Origin, ND_Pipe, EN_PipeSpec, Orientation, RotationAngle)
# The Origin of the elbow is in the center of the bend.
# The Orientation is a point. Two elements in the point will contain a "1," indicating the axes on which the arms of the elbow lie. A positive or negative sign indicate whether or not the arms point in the positive or negative direction on its axis.
[1; 1; 0]  # indicates that one arm lies on the x axis and another on the y axis
[1; 0; 1]  # indicates that one arm lies on the x axis and another on the z axis
[0; -1; 1]  # indicates that one arm lies on the y axis in the negative direction, and another on the z axis in the positive direction
# The rotation angle will allow the user to rotate the elbow in the plane in which it is oriented.
# tee
teeF(Origin, ND_Pipe, EN_PipeSpec, OrientationLong, OrientationShort, RotationAngle)
# The Origin of the tee will define the center of the intersection of the two pipes.
# The orientation of the longer part of the tee is given by the point OrientationLong. Two elements in this point will contain a "0" and the other will be "1," indicating the axis along which the longer part lies. Allowable inputs to OrientationLong are as follows:
[1; 0; 0]  # indicates that it lies along the x axis
[0; 1; 0]  # indicates that it lies along the y axis
[0; 0; 1]  # indicates that it lies along the z axis
# The orientation of the shorter part is also given by a point, OrientationShort. This point functions the same way as OrientationLong, except that the "1" may be either negative or positive, giving the direction on the axis on which it lies. For instance:
[-1; 0; 0]  # indicates that it lies in the negative x direction
[0; 1; 0]  # indicates that it lies in the positive y direction
[0; 0; -1]  # indicates that it lies in the negative z direction
# coupling
[1; 0; 0]  # indicates that it lies along the x axis
[0; 1; 0]  # indicates that it lies along the y axis
[0; 0; 1]  # indicates that it lies along the z axis
# male adapter
# takes a point as an input. the element that contains a "1" indicates the axis along which it lies. A positive sign indicates that it points in the positive direction of that axis, while a negative signs indicates that it points in the negative direction of that axis
[1; 0; 0]  # indicates that the slip side lies along the positive x axis
[-1; 0; 0]  # indicates that the slip side lies along the negative x axis
[0; 1; 0]  # indicates that the slip side lies along the positive y axis
[0; -1; 0]  # indicates that the slip side lies along the negative y axis
[0; 0; 1]  # indicates that the slip side lies along the positive z axis
[0; 0; -1]  # indicates that the slip side lies along the negative z axis
# cross
# takes a point as an input, where the element that contains a "1" indicates the axis that is perpendicular to the plane in which the cross lies
[1; 0; 0]  # indicates that it lies in the yz plane
[0; 1; 0]  # indicates that it lies in the xz plane
[0; 0; 1]  # indicates that it lies in the xy plane
# elbow
# takes a point as an input. two elements in the point will contain a "1," indicating the axes on which the arms of the elbow lie. A positive or negative sign indicate whether or not the arms point in the positive or negative direction on its axis
# Do we want to do the same for more specific pieces like chimney stops or caps?
[1; 1; 0]  # indicates that one arm lies on the x axis and another on the y axis
[1; 0; 1]  # indicates that one arm lies on the x axis and another on the z axis
[0; -1; 1]  # indicates that one arm lies on the y axis in the negative direction, and another on the z axis in the positive direction
# tee
# a tee must take two points to specify the orientation. the first point indicates the axis on which the longer part lies (works the same way as the coupling point). the second point indicates the axis and direction of the shorter part (works the same way as the male adapter point)
# In the even that we find a way to subtract objects by name using keyboard commands, the layer control should be hidden within the function calls. Then the functions would need additional arguments.
# All layers, including a temporary subtraction layer, should be created in the first script of the program.
# All functions will require a layer name as an input. The function itself will then thaw that layer and freeze it when appropriate.
# Some functions, (such as MaleAdapterF and CouplingF), will need to make subtractions from other layers. In this case, the function will take an array of layers as an argument. The function will thaw and freeze those layers when needed.
# A new subtract function will need to be defined, and should take the place of all other subtract functions.
SubtractF(LayerToSubtract, ArrayOfLayersToSubtractFrom)
# The function will thaw the layers to subtract from, and then subtract the object by layer name.
# At the very end of any program, the subtraction layer should be purged.
# Restructuring the MtoATranslators
# Remove all redundant MtoATranslators (especially ones specific to 2D space.)
# Determine the effect of adding an extra space to the end of translators.
# Build rotation options in to existing functions: torus, box, wedge
