# There should be no reason to use functions highlighted in RED (unless you are writing a plant element function). Look to MtoATranslators Wrapped for alternatives.
# Automated Design: AutoCAD: Basics
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# Colors
grey := [132; 132; 132]
ltgrey := [214; 214; 214]
dkgrey := [91; 91; 91]
blue := [0; 255; 255]
black := [0; 0; 0]
blue2 := [0; 191; 255]
blue3 := [0; 127; 255]
green := [0; 255; 0]
purple := [127; 0; 255]
ltpurple := [125; 0; 160]
red := [255; 0; 0]
yellow := [255; 255; 0]
# Using Numbers in Code
sp := " "
zc := .01 m
stringit(x) := num2str(round(x/m, 5))
stringit_nounits(x) := num2str(round(x, 5))
point(pointarray) :=
    temp ← ""
    for i ∈ 0 .. (rows(pointarray) - 1)
        temp ← concat(temp, stringit(pointarray[i]))
        temp ← concat(temp, ",") if i < (rows(pointarray) - 1)
    temp
point_nounits(pointarray) :=
    temp ← ""
    for i ∈ 0 .. (rows(pointarray) - 1)
        temp ← concat(temp, stringit_nounits(pointarray[i]))
        temp ← concat(temp, ",") if i < (rows(pointarray) - 1)
    temp
# Views
# View function, generates ACAD code to shift view to specified angle inputs: x= t (top), f (front), r (right), l (left) e.g. view("t"), view("f"), view("r"), view("l")
view(x) := concat("_-view", sp, "o", sp, x)
# Cylinders
cylinderD(p1, R1, p2) := concat("_cylinder", sp, point(p1[:, 0]), sp, stringit(R1), sp, "a", sp, point(p2[:, 0]))
# this cylinder should not be used outside of drawing functions!!! use CylinderF instead. (Found in MtoA Translators Wrapped). If you need an extra space, manually concat an "sp" into your code.
# Unions
Union_All := concat("_union", sp, "all", sp)
UnionMultiple(PointArray) :=
    one ← concat("_union", sp)
    for i ∈ 0 .. last(PointArray)
        one ← concat(one, point(PointArray[i][:, 0]), sp)
    return one
# Subtractions
SubtractGeneral(PointArrayFrom, PointArrayToSubtract) :=
    Local ← concat("_subtract", sp)
    for i ∈ 0 .. last(PointArrayFrom)
        Local ← concat(Local, point(PointArrayFrom[i]), sp)
    for j ∈ 0 .. last(PointArrayToSubtract)
        Local ← concat(Local, sp, point(PointArrayToSubtract[j]))
    Local ← concat(Local, sp)
    return Local
SubtractAll(p1) := concat("_subtract", sp, point(p1[:, 0]), sp, sp, "all", sp)
# Mirrors
MirrorAll(p1, p2, Erase) := concat("_mirror", sp, "all", sp, sp, point(p1[:, 0]), sp, point(p2[:, 0]), sp, Erase)
# Plane must be either "xy", "yz", or "zx" - you must include quotes
# Erase is either "y" for yes, or "n" for no - include quotes
# replace mirror.all with MirrorAll (just in ChemStockTanksAC)
Mirror(p1, p2, p3, Erase) := concat("_mirror", sp, point(p1[:, 0]), sp, sp, point(p2[:, 0]), sp, point(p3[:, 0]), sp, Erase)
# Replace mirrorA calls with Mirror, and change any Mirror calls to include the erase option
MirrorLast(p1, p2, Erase) := concat("_mirror", sp, "l", sp, sp, point(p1[:, 0]), sp, point(p2[:, 0]), sp, Erase, sp, sp)
# are the final spaces here necessary? can they be eliminated?--overall, figure out how ending spaces affect calls in the code
MirrorGroup(p1, p2, GroupName, Erase) := concat("_mirror", sp, "g", sp, GroupName, sp, sp, point(p1[:, 0]), sp, point(p2[:, 0]), sp, Erase, sp, sp)
# If you need to mirror several objects, use a group function and then MirrorGroup or Mirror3dGroup.
Mirror3dAll(Plane, ReflectionPoint, Erase) := concat("mirror3d", sp, "all", sp, sp, Plane, sp, point(ReflectionPoint[:, 0]), sp, Erase, sp, sp)
Mirror3dGroup(GroupName, Plane, ReflectionPoint, Erase) := concat("_mirror3d", sp, "g", sp, GroupName, sp, Plane, point(ReflectionPoint[:, 0]), sp, Erase, sp, sp)
# Checked that this works in SRSF file; works fine and can replace old Mirror 3dGroup function
Mirror3dSelect(p1, p2, Plane, Erase) := concat("_mirror3d", sp, point(p1[:, 0]), sp, sp, Plane, sp, point(p2[:, 0]), sp, Erase)
# This function is currently unused in the code, but can be used to select a particular 3d object that needs to be mirrored.
# Torus
Torus(p1, R1, R2) := concat("_torus", sp, point(p1[:, 0]), sp, stringit(R1), sp, stringit(R2))
# The Torus and Box functions should not be used outside of drawing functions!!! Use TorusF and BoxF instead found in MtoATranslators wrapped. If you need to add spaces, manually concat an "sp" into your code.
# Box
Box(p1, p2) := concat("_box", sp, point(p1[:, 0]), sp, point(p2[:, 0]))
# Zoom
Zoom_Window(p1, p2) := concat("_zoom", sp, "w", sp, point(p1[:, 0]), sp, point(p2[:, 0]))
# This will be the only zoom function used in the code once I'm done.
# Move
Move(p1, p2, p3) := concat("_move", sp, point(p1[:, 0]), sp, sp, point(p2[:, 0]), sp, "@", point(p3[:, 0]))
MoveLast(p1, p2) := concat("_move", sp, "l", sp, sp, point(p1[:, 0]), sp, point(p2[:, 0]), sp, sp)
MoveAll(p1, p2) := concat("_move", sp, "all", sp, sp, point(p1[:, 0]), sp, point(p2[:, 0]))
# Array
array_all(nrow, ncol, dist) := concat("-array", sp, "all", sp, sp, "R", sp, stringit_nounits(nrow), sp, stringit_nounits(ncol), sp, stringit(dist))
ArrayLast(nrow, ncol, dist) := concat("-array", sp, "l", sp, sp, "R", sp, stringit_nounits(nrow), sp, stringit_nounits(ncol), sp, stringit(dist))
ArrayLastPolar(RotationPoint, NumItems, Angle) := concat("-array", sp, "l", sp, sp, "P", sp, point(RotationPoint[:, 0]), sp, stringit_nounits(NumItems), sp, stringit_nounits(Angle/deg), sp, "Y")
ArrayMultiple(PointArray, nrow, ncol, drow, dcol) :=
    Local ← "-array"
    for i ∈ 0 .. last(PointArray)
        Local ← stack(Local, point(PointArray[i]))
    Local ←
        stack(Local, concat(sp, "R", sp, stringit_nounits(nrow), sp, stringit_nounits(ncol), sp, stringit(dcol))) if nrow == 1
        stack(Local, concat(sp, "R", sp, stringit_nounits(nrow), sp, stringit_nounits(ncol), sp, stringit(drow))) if ncol == 1
        stack(Local, concat(sp, "R", sp, stringit_nounits(nrow), sp, stringit_nounits(ncol), sp, stringit(drow), sp, stringit(dcol))) otherwise
    return Local
Array_All(nrow, ncol, dist) := concat("-array", sp, "all", sp, sp, "R", sp, stringit_nounits(nrow), sp, stringit_nounits(ncol), sp, stringit(dist))
ArrayLastGen(nrow, ncol, drow, dcol) :=
    Local ←
        stack(concat("-array", sp, "l", sp), concat(sp, "R", sp, stringit_nounits(nrow), sp, stringit_nounits(ncol), sp, stringit(dcol))) if nrow == 1
        stack(concat("-array", sp, "l", sp), concat(sp, "R", sp, stringit_nounits(nrow), sp, stringit_nounits(ncol), sp, stringit(drow))) if ncol == 1
        stack(concat("-array", sp, "l", sp), concat(sp, "R", sp, stringit_nounits(nrow), sp, stringit_nounits(ncol), sp, stringit(drow), sp, stringit(dcol))) otherwise
    return Local
# Rotate
Rotate3DLast(RotationPoint, axis, angle) := concat("rotate3d", sp, "l", sp, sp, axis, sp, point(RotationPoint[:, 0]), sp, stringit_nounits(angle/deg))
RotateAll(object, angle) := concat("_rotate", sp, "all", sp, sp, point(object[:, 0]), sp, stringit_nounits(angle))
# Group
GroupAll(GroupName) :=
    one ← concat("-group", sp, "c", sp, GroupName, sp, "y", sp)
    two ← concat("all", sp)
    three ← stack(one, two)
    three
# The GroupName argument must be given with quotes around it!
# This will only work if the group already exists!
Group(GroupName, p1) :=
    one ← concat("-group", sp, "c", sp, GroupName, sp)
    two ← concat(point(p1[:, 0]), sp)
    return stack(one, two)
GroupSelect(GroupName, ArrayOfPoints) :=
    one ← concat("-group", sp, "c", sp, GroupName, sp, "y", sp)
    for i ∈ 0 .. last(ArrayOfPoints)
        one ← stack(one, point(ArrayOfPoints[i][:, 0]))
    one[last(one)] ← concat(one[last(one)], sp)
    return one
# type = 1 sets to group selection
# type = 0 sets to individual selection
CopyGroup(GroupName, BasePoint, ArrayOfCopyPoints) :=
    one ← concat("_copy", sp, "g", sp, GroupName, sp, sp, point(BasePoint[:, 0]))
    for i ∈ 0 .. last(ArrayOfCopyPoints)
        one ← stack(one, point(ArrayOfCopyPoints[i][:, 0]))
    one ← stack(one, "e")
    return one
SubtractGroups(GroupsToSubtractFrom, GroupToSubtract) :=
    local ← "_subtract"
    for i ∈ 0 .. last(GroupsToSubtractFrom)
        local ← stack(local, concat("g", sp, GroupsToSubtractFrom[i]))
    local ← stack(local, concat(sp, "g", sp, GroupToSubtract, sp))
    local
GroupLast(GroupName) :=
    one ← concat("-group", sp, "c", sp, GroupName, sp, "y", sp)
    two ← concat("l", sp)
    three ← stack(one, two)
    three
# Layer
layer_new(title, color) :=
    one ← concat("-layer", sp, "m", sp, title)
    two ← concat("c", sp, "t", sp, point_nounits(color[:, 0]))
    three ← concat(title)
    four ← concat(sp, sp)
    tot ← stack(one, two, three, four)
    return tot
# layer.new is the only one of these layer functions you should be using. Other than that, if you want to edit a frozen layer, use SelectLayer(LayerName). If you want to freeze a layer, use FreezeLayer(LayerName). Both of these functions can be found in the MtoA Translator Wrapped.
layer_set(title) :=
    one ← concat("-layer", sp, "s", sp, title)
    two ← concat(sp, sp)
    tot ← stack(one, two)
    return tot
layer_freeze(title) :=
    one ← concat("-layer", sp, "f", sp, title)
    two ← concat(sp, sp)
    tot ← stack(one, two)
    return tot
layer_thaw(title) :=
    one ← concat("-layer", sp, "t", sp, title)
    two ← concat(sp, sp)
    tot ← stack(one, two)
    return tot
SelectLayer(LayerName) := stack(layer_thaw(LayerName), layer_set(LayerName))
FreezeLayer(LayerName) := stack(GroupAll(LayerName), layer_set("0"), layer_freeze(LayerName))
ThawMultiple(LayerVector) :=
    Local ← concat("-layer", sp, "t", sp, LayerVector[0])
    if last(LayerVector) ≥ 2
        for i ∈ 1 .. last(LayerVector) - 1
            Local ← stack(Local, concat("t", sp, LayerVector[i]))
    return stack(Local, concat("t", sp, LayerVector[last(LayerVector)]), concat(sp, sp))
FreezeMultiple(LayerVector) :=
    Local ← stack(layer_set("0"), concat("-layer", sp, "f", sp, LayerVector[0]))
    if last(LayerVector) ≥ 2
        for i ∈ 1 .. last(LayerVector) - 1
            Local ← stack(Local, concat("f", sp, LayerVector[i]))
    return stack(Local, concat("f", sp, LayerVector[last(LayerVector)]), concat(sp, sp))
SubtractF(GroupsToSubtractFrom, GroupToSubtract) :=
    local ← layer_thaw(GroupsToSubtractFrom[0])
    if last(GroupsToSubtractFrom) > 0
        for i ∈ 1 .. last(GroupsToSubtractFrom)
            local ← stack(local, layer_thaw(GroupsToSubtractFrom[i]))
    local ← stack(local, "_subtract")
    for i ∈ 0 .. last(GroupsToSubtractFrom)
        local ← stack(local, concat("g", sp, GroupsToSubtractFrom[i]))
    local ← stack(local, concat(sp, "g", sp, GroupToSubtract, sp))
    for i ∈ 0 .. last(GroupsToSubtractFrom)
        local ← stack(local, layer_freeze(GroupsToSubtractFrom[i]))
    local
# GroupsToSubtractFrom must be defined as an array, even if it only has one value!! The group names must be entered with quotes around them.
FreezeVP(LayerVector) :=
    Local ← concat("vplayer", sp, "f", sp, LayerVector[0])
    if last(LayerVector) > 0
        for i ∈ 1 .. last(LayerVector)
            Local ← stack(Local, concat(sp, sp, sp, "f", sp, LayerVector[i]))
    return stack(Local, sp)
# Loft
Loft(p1, p2) :=
    one ← concat("select", sp, point(p1[:, 0]), sp, point(p2[:, 0]), sp, sp, "loft", sp)
    two ← stack(one)
    return two
# Pline
# update all Pline functions to use 3dPoly
Pline(PointArray) :=
    one ← concat("_pline")
    for i ∈ 0 .. last(PointArray)
        one ← stack(one, point(PointArray[i][:, 0]))
    one[last(one)] ← concat(one[last(one)], sp)
    return one
Pline3D(PointArray) :=
    one ← "3dpoly"
    for i ∈ 0 .. last(PointArray)
        one ← stack(one, point(PointArray[i][:, 0]))
    one[last(one)] ← concat(one[last(one)], sp)
    return one
# Extrude
extrude(p1, L) :=
    concat("_extrude", sp, point(p1[:, 0]), sp, sp, stringit(L), sp) if acad_version == 2006
    concat("_extrude", sp, point(p1[:, 0]), sp, sp, stringit(L)) if acad_version == 2008
    concat("_extrude", sp, point(p1[:, 0]), sp, sp, stringit(L)) otherwise  # error: This variable is undefined.
# Wedge
wedge3d(p1, p2) := concat("_wedge", sp, point(p1[:, 0]), sp, point(p2[:, 0]))
# Note: This is preliminary.  This uses a 4 in valve and scales it according to the needs of the plant being drawn.
# Insert Block | update to scale in all dimensions!!!
insertdwg(filepath, insertionpoint, Xscalefactor, Yscalefactor, AN_rotation) := stack(concat("-insert", sp, filepath), concat(point(insertionpoint[:, 0]), sp, "x", sp, stringit_nounits(Xscalefactor), sp, stringit_nounits(Yscalefactor), sp, sp, stringit_nounits(AN_rotation/deg)))
# StartPoint MUST be a 2-D point only!!! | EndPoint is relative to StartPoint NOT the origin.
# Dimension
LinearDim(StartPoint, DistToEndPoint, DimLocation, Orientation) :=
    dim ← concat("dimlinear", sp, point(StartPoint[:, 0]), sp, concat("0,", stringit(DistToEndPoint)), sp, Orientation, sp, concat("@", stringit(DimLocation), "0")) if Orientation == "v"
    dim ← concat("dimlinear", sp, point(StartPoint[:, 0]), sp, concat(stringit(DistToEndPoint), ",0"), sp, Orientation, sp, concat("@0,", stringit(DimLocation))) otherwise
    return dim
# Circle
circle(OriginPoint, Radius) := concat("c", sp, point(OriginPoint[:, 0]), sp, stringit(Radius), sp)
FlexCylinder(PathPoints, D) :=
    PathInputs ← PathPoints
    for i ∈ 1 .. last(PathPoints)
        PathInputs[i] ← PathPoints[i] - PathPoints[i - 1]
    Path ← concat("spline", sp, point(PathInputs[0]))
    for j ∈ 1 .. last(PathInputs)
        Path ← concat(Path, sp, point(PathInputs[j]))
    DrawCircle ← circle(PathPoints[0], D/2)
    CirclePoint ← [0; D/2; 0] + PathInputs[0]
    SetSurfaceAssociativity ← concat("surfaceassociativity", sp, "0")
    SetDelObj ← concat("delobj", sp, "2")
    Sweep ← concat("sweep", sp, "mo", sp, "so", sp, point(CirclePoint), sp, sp, point(PathPoints[0]), sp)
    Concat ← concat(DrawCircle, SetSurfaceAssociativity)
    ZoomFlex ← concat(sp, "z", sp, "o", sp, point(PathPoints[0]), sp)
    FinalStack ← stack(Path, sp, ZoomFlex, Concat, SetDelObj, Sweep)
    return FinalStack
