# There should be no reason to use functions highlighted in RED (unless you are writing a plant element function). Look to MtoATranslators Wrapped for alternatives.
# Automated Design: AutoCAD: Basics
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# Colors
pastelgreen := [212; 255; 170]
brightpurple := [191; 0; 255]
black := [0; 0; 0]
grey := [132; 132; 132]
ltgrey := [214; 214; 214]
dkgrey := [91; 91; 91]
blue := [0; 255; 255]
seafoamgreen := [0; 255; 127]
plum := [129; 0; 129]
blue2 := [0; 191; 255]
blue3 := [0; 127; 255]
green := [0; 255; 0]
purple := [127; 0; 255]
pastelyellow := [255; 255; 170]
ltpurple := [125; 0; 160]
red := [255; 0; 0]
yellow := [255; 255; 0]
pink := [255; 20; 147]
turquoise := [0; 189; 189]
# Using Numbers in Code
sp := " "
zc := .01 m
zc_point := [0; .1; 0]*m
stringit(x) := num2str(round(x/m, 5))
stringit_nounits(x) := num2str(round(x, 5))
point(pointarray) :=
    temp ← ""
    for i ∈ 0 .. (rows(pointarray) - 1)
        temp ← concat(temp, stringit(pointarray[i]))
        temp ← concat(temp, ",") if i < (rows(pointarray) - 1)
    temp
point_nounits(pointarray) :=
    temp ← ""
    for i ∈ 0 .. (rows(pointarray) - 1)
        temp ← concat(temp, stringit_nounits(pointarray[i]))
        temp ← concat(temp, ",") if i < (rows(pointarray) - 1)
    temp
# Views
viewtop1 := concat("_-view", sp, "o", sp, "t")
viewtop := concat("_-view", sp, "o", sp, "t", sp)
viewfront := concat("_-view", sp, "o", sp, "f", sp)
# View function, generates ACAD code to shift view to specified angle
# inputs: x= t (top), f (front), r (right), l (left)
# e.g. view(t), view(f), view(r), view(l)
viewfront1 := concat("_-view", sp, "o", sp, "f")
view(x) := concat("_-view", sp, "o", sp, x)
viewrightside := concat("_-view", sp, "o", sp, "r", sp)
viewrightside1 := concat("_-view", sp, "o", sp, "r")
viewrightside = "_-view o r "
view("r") = "_-view o r"
viewleftside := concat("_-view", sp, "o", sp, "l")
viewse := concat("-view", sp, "se")
viewisometric := concat("vpoint", sp, "1,1,1", sp)
mechanical*design*convention
# these cylinders should not be used outside of drawing functions!!! use CylinderF instead. (Found in MtoA Translators Wrapped). If you need an extra space, manually concat an "sp" into your code.
# Cylinders
cylinderA(p1, R1, L) := concat("_cylinder", sp, point(p1[:, 0]), sp, stringit(R1), sp, stringit(L), sp)
cylinderB(p1, R1, p2) :=
    concat("_cylinder", sp, point(p1[:, 0]), sp, stringit(R1), sp, "c", sp, point(p2[:, 0]), sp) if acad_version == 2004 or 2006
    concat("_cylinder", sp, point(p1[:, 0]), sp, stringit(R1), sp, "a", sp, point(p2[:, 0]), sp) if acad_version == 2007
    concat("_cylinder", sp, point(p1[:, 0]), sp, stringit(R1), sp, "a", sp, point(p2[:, 0]), sp) if acad_version == 2008
    concat("_cylinder", sp, point(p1[:, 0]), sp, stringit(R1), sp, "f", sp, point(p2[:, 0]), sp) otherwise
# Two new cylinder drawing functions, one inputs a starting point, radius and length (PRL)
# and the other inputs a starting point, radius and secondary point to extend out to (PRP)
cylinderC(p1, R1, L) := concat("_cylinder", sp, point(p1[:, 0]), sp, stringit(R1), sp, stringit(L))
Cylinder_PRL(p1, R1, L) := concat("_cylinder", sp, point(p1[:, 0]), sp, stringit(R1), sp, stringit(L))
Cylinder_PRP(p1, R1, p2) :=
    concat("_cylinder", sp, point(p1[:, 0]), sp, stringit(R1), sp, "c", sp, point(p2[:, 0])) if acad_version == 2004 or 2006
    concat("_cylinder", sp, point(p1[:, 0]), sp, stringit(R1), sp, "a", sp, point(p2[:, 0])) if acad_version == 2007 or 2008
    concat("_cylinder", sp, point(p1[:, 0]), sp, stringit(R1), sp, "a", sp, point(p2[:, 0])) otherwise
cylinderD(p1, R1, p2) :=
    concat("_cylinder", sp, point(p1[:, 0]), sp, stringit(R1), sp, "c", sp, point(p2[:, 0])) if acad_version == 2004 or 2006
    concat("_cylinder", sp, point(p1[:, 0]), sp, stringit(R1), sp, "a", sp, point(p2[:, 0])) if acad_version == 2007
    concat("_cylinder", sp, point(p1[:, 0]), sp, stringit(R1), sp, "a", sp, point(p2[:, 0])) otherwise
# TEST OF NEW CYLINDER FUNCTIONS - SAME INPUTS
Cylinder_PRP(zc_point, 10 m, 2*zc_point) =  # error: This variable is undefined.
Cylinder_PRL(zc_point, 10 m, 2 m) = "_cylinder 0,0.1,0 10 2"
# Unions
cylinderD(zc_point, 10 m, 2*zc_point) =  # error
cylinderA(zc_point, 10 m, 2 m) = "_cylinder 0,0.1,0 10 2 "
cylinderB(zc_point, 10 m, 2*zc_point) =  # error
cylinderC(zc_point, 10 m, 2 m) = "_cylinder 0,0.1,0 10 2"
unionA(p1, p2) := concat("_union", sp, point(p1[:, 0]), sp, point(p2[:, 0]), sp, sp)
unionB(p1, p2, p3, p4) := concat("_union", sp, point(p1[:, 0]), sp, point(p2[:, 0]), sp, point(p3[:, 0]), sp, point(p4[:, 0]), sp, sp)
unionC(p1, p2) := concat("_union", sp, point(p1[:, 0]), sp, point(p2[:, 0]), sp)
union_all := concat("_union", sp, "all", sp, sp)
union_allA := concat("_union", sp, "all", sp)
# NEW UNION FUNCTIONS
# Union.2, Union.3, Union.4, Union.All, Union.Elbow and Union.Multiple
bigunion_elbow(p1, p2, p3, R1, R2) := concat("_union", sp, point(p1[:, 0]), sp, "1", sp, "@", stringit(R1 + R2), "<45", sp, point(p2[:, 0]), sp, point(p3[:, 0]), sp)
Union_2(p1, p2) := concat("_union", sp, point(p1[:, 0]), sp, point(p2[:, 0]), sp)
bigunion(p1, p2, p3, p4) := concat("_union", sp, point(p1[:, 0]), sp, point(p2[:, 0]), sp, point(p3[:, 0]), sp, point(p4[:, 0]), sp, sp)
Union_3(p1, p2, p3) := concat("_union", sp, point(p1[:, 0]), sp, point(p2[:, 0]), sp, point(p3[:, 0]), sp)
bigunionA(p1, p2, p3, p4) := concat("_union", sp, point(p1[:, 0]), sp, point(p2[:, 0]), sp, point(p3[:, 0]), sp, point(p4[:, 0]), sp)
Union_4(p1, p2, p3, p4) := concat("_union", sp, point(p1[:, 0]), sp, point(p2[:, 0]), sp, point(p3[:, 0]), sp, point(p4[:, 0]), sp)
Union_All := concat("_union", sp, "all", sp)
Union_Elbow(p1, p2, p3, R1, R2) := concat("_union", sp, point(p1[:, 0]), sp, "1", sp, "@", stringit(R1 + R2), "<45", sp, point(p2[:, 0]), sp, point(p3[:, 0]), sp)
UnionMultiple(PointArray) :=
    one ← concat("_union", sp)
    for i ∈ 0 .. last(PointArray)
        one ← concat(one, point(PointArray[i][:, 0]), sp)
    return one
# Subtractions
# these subtractions should not be used outside of drawing functions!!! Use SubtractF instead (found in MtoA Translators Wrapped). If you need an extra space, manually concat an "sp" into your code.
unionA(zc_point, zc_point) = "_union 0,0.1,0 0,0.1,0  "
union_allA = "_union all "
subtractA(p1, p2) := concat("_subtract", sp, point(p1[:, 0]), sp, sp, point(p2[:, 0]), sp, sp)
Union_2(zc_point, zc_point) = "_union 0,0.1,0 0,0.1,0 "
Union_All = "_union all "
subtractB(p1, p2, p3) := concat("_subtract", sp, point(p1[:, 0]), sp, point(p2[:, 0]), sp, sp, point(p3[:, 0]), sp, sp)
subtractC(p1, p2, p3) := concat("_subtract", sp, point(p1[:, 0]), sp, sp, point(p2[:, 0]), sp, point(p3[:, 0]), sp)
unionB(zc_point, zc_point, zc_point, zc_point) = "_union 0,0.1,0 0,0.1,0 0,0.1,0 0,0.1,0  "
subtractD(p1, p2) := concat("_subtract", sp, point(p1[:, 0]), sp, sp, point(p2[:, 0]), sp)
Union_4(zc_point, zc_point, zc_point, zc_point) = "_union 0,0.1,0 0,0.1,0 0,0.1,0 0,0.1,0 "
subtractDall(p1) := concat("_subtract", sp, point(p1[:, 0]), sp, sp, "all", sp)
subtractH(p1, p2, p3) := concat("_subtract", sp, point(p1[:, 0]), sp, sp, point(p2[:, 0]), sp, point(p3[:, 0]), sp)
subtractJ(p1, p2, p3, p4) := concat("_subtract", sp, point(p1[:, 0]), sp, point(p2[:, 0]), sp, point(p3[:, 0]), sp, sp, point(p4[:, 0]), sp)
subtractK(p1, p2, p3) := concat("_subtract", sp, point(p1[:, 0]), sp, point(p2[:, 0]), sp, sp, point(p3[:, 0]), sp)
SubtractGeneral(PointArrayFrom, PointArrayToSubtract) :=
    Local ← concat("_subtract", sp)
    for i ∈ 0 .. last(PointArrayFrom)
        Local ← concat(Local, point(PointArrayFrom[i]), sp)
    for j ∈ 0 .. last(PointArrayToSubtract)
        Local ← concat(Local, sp, point(PointArrayToSubtract[j]))
    Local ← concat(Local, sp)
    return Local
SubtractAll(p1) := concat("_subtract", sp, point(p1[:, 0]), sp, sp, "all", sp)
test := [0; 0; 0]*m
test1 := [1; 1; 1]*m
SubtractGeneral([test], [test1]) = "_subtract 0,0,0  1,1,1 "
# Mirrors
# The top four functions don't work, because they should all end in either 'n' or 'y' when AUTOCAD asks to erase the source object - they are probably out of date
Mirror(p1, p2, p3) := concat("_mirror", sp, point(p1[:, 0]), sp, sp, point(p2[:, 0]), sp, point(p3[:, 0]), sp, "n")
mirror(p1, p2, p3) := concat("_mirror", sp, point(p1[:, 0]), sp, sp, point(p2[:, 0]), sp, point(p3[:, 0]), sp)
Mirror3D_zx(p1, p2) := concat("_mirror3d", sp, point(p1[:, 0]), sp, sp, "zx", sp, point(p2[:, 0]), sp, "n")
mirrorA(p1, p2, p3) := concat("_mirror", sp, point(p1[:, 0]), sp, sp, point(p2[:, 0]), sp, point(p3[:, 0]), sp, sp)
Mirror3DAll_zx(p1) := concat("_mirror3d", sp, "all", sp, sp, "zx", sp, point(p1[:, 0]), sp, "n")
mirrorB(p1, p2, p3, p4) := concat("_mirror", sp, p1[:, 0], sp, point(p2[:, 0]), sp, sp, point(p3[:, 0]), sp, point(p4[:, 0]), sp, sp)
Mirror3D_yz(p1, p2) := concat("_mirror3d", sp, point(p1[:, 0]), sp, sp, "yz", sp, point(p2[:, 0]), sp, "n")
mirrorC(p1, p2, p3, p4) := concat("_mirror", sp, point(p1[:, 0]), sp, point(p2[:, 0]), sp, sp, point(p3[:, 0]), sp, point(p4[:, 0]), sp)
MirrorAll(p1, p2, Option) := concat("_mirror", sp, "all", sp, sp, point(p1[:, 0]), sp, point(p2[:, 0]), sp, Option)
mirrorD(p1, p2, p3) := concat("_mirror", sp, point(p1[:, 0]), sp, sp, point(p2[:, 0]), sp, point(p3[:, 0]), sp, "n")
# option is "y" or "n" to delete source object
mirror3d(p1, p2) := concat("_mirror3d", sp, point(p1[:, 0]), sp, sp, "zx", sp, point(p2[:, 0]), sp, "n")
mirror3d_all(p2) := concat("_mirror3d", sp, "all", sp, sp, "zx", sp, point(p2[:, 0]), sp, "n")
mirror3dyz(p1, p2) := concat("_mirror3d", sp, point(p1[:, 0]), sp, sp, "yz", sp, point(p2[:, 0]), sp, "n")
mirror_all(p1, p2) := concat("_mirror", sp, "all", sp, sp, point(p1[:, 0]), sp, point(p2[:, 0]), sp)  # This one is also probably out of date
mirror_allyes(p1, p2) := concat("_mirror", sp, "all", sp, sp, point(p1[:, 0]), sp, point(p2[:, 0]), sp, "y")
Mirror3dAll(Plane, ReflectionPoint, Erase) := concat("mirror3d", sp, "all", sp, sp, Plane, sp, point(ReflectionPoint[:, 0]), sp, Erase, sp, sp)
# Plane must be either "xy", "yz", or "zx" - you must include quotes
# Erase is either "y" for yes, or "n" for no - include quotes
Mirror3dGroup(GroupName, Plane, ReflectionPoint, Erase) :=
    one ← concat("mirror3d", sp, "g", sp, GroupName)
    two ← concat(Plane, point(ReflectionPoint[:, 0]), sp, Erase, sp)
    return stack(one, two)
MirrorLast(p1, p2, Erase) := concat("_mirror", sp, "l", sp, sp, point(p1[:, 0]), sp, point(p2[:, 0]), sp, Erase, sp, sp)
MirrorGroup(p1, p2, GroupName, Erase) := concat("_mirror", sp, "g", sp, GroupName, sp, sp, point(p1[:, 0]), sp, point(p2[:, 0]), sp, Erase, sp, sp)
# Torus
torus(p1, R1, R2) := concat("_torus", sp, point(p1[:, 0]), sp, stringit(R1), sp, stringit(R2), sp)
# The Torus and Box functions should not be used outside of drawing functions!!! Use TorusF and BoxF instead found in MtoATranslators wrapped. If you need to add spaces, manually concat an "sp" into your code.
torus1(p1, R1, R2) := concat("_torus", sp, point(p1[:, 0]), sp, stringit(R1), sp, stringit(R2))
# Box
Torus(p1, R1, R2) := concat("_torus", sp, point(p1[:, 0]), sp, stringit(R1), sp, stringit(R2))
box(p1, p2) := concat("_box", sp, point(p1[:, 0]), sp, point(p2[:, 0]))
Box(p1, p2) := concat("_box", sp, point(p1[:, 0]), sp, point(p2[:, 0]))
boxA(p1, p2) := concat("_box", sp, point(p1[:, 0]), sp, point(p2[:, 0]), sp)
# Zoom
zoom := concat("_zoom", sp, "e", sp)
zoomA := concat("_zoom", sp, "e")
zoom_win(p1, p2) := concat("_zoom", sp, "w", sp, point(p1[:, 0]), sp, point(p2[:, 0]))
zoom_extents := concat("_zoom",sp,"e")
zoom_wina(p1, p2) := concat("_zoom", sp, "w", sp, point(p1[:, 0]), sp, point(p2[:, 0]), sp)
zoom_window(p1, p2) := concat("_zoom", sp, "w", sp, point(p1[:, 0]), sp, point(p2[:, 0]))
# Union
bigunion_elbow(p1, p2, p3, R1, R2) := concat("_union", sp, point(p1[:, 0]), sp, "1", sp, "@", stringit(R1 + R2), "<45", sp, point(p2[:, 0]), sp, point(p3[:, 0]), sp)
bigunion(p1, p2, p3, p4) := concat("_union", sp, point(p1[:, 0]), sp, point(p2[:, 0]), sp, point(p3[:, 0]), sp, point(p4[:, 0]), sp, sp)
# The replacement functions for UNION commands are already listed above.
# The cases for these functions are within the range covered by the replacers.
bigunionA(p1, p2, p3, p4) := concat("_union", sp, point(p1[:, 0]), sp, point(p2[:, 0]), sp, point(p3[:, 0]), sp, point(p4[:, 0]), sp)
# Copy
copyA(p1, p2, p3, p4) := concat("_copy", sp, point(p1[:, 0]), sp, sp, point(p2[:, 0]), sp, point(p3[:, 0]), sp, point(p4[:, 0]), sp)
# Spaces seperate individual items, double spaces seperate
# the item to be copied from the points to copy it to.
# p1 = object to copy
# p2 = point of displacement
# p3 = point to place first copy
# p4 = point to place second copy (if applicable) .... etc
copyB(p1, p2, p3) := concat("_copy", sp, point(p1[:, 0]), sp, sp, point(p2[:, 0]), sp, point(p3[:, 0]), sp)
copyC(p1, p2, p3, p4) := concat("_copy", sp, point(p1[:, 0]), sp, sp, point(p2[:, 0]), sp, "@", point(p3[:, 0]), sp, "@", point(p4[:, 0]), sp)
Copy(object, p2, p3) := concat("_copy", sp, point(object[:, 0]), sp, sp, point(p2[:, 0]), sp, point(p3[:, 0]), sp)
copyD(p1, p2, p3, p4, p5) := concat("_copy", sp, point(p1[:, 0]), sp, sp, point(p2[:, 0]), sp, "@", point(p3[:, 0]), sp, "@", point(p4[:, 0]), sp, "@", point(p5[:, 0]), sp)
Copy2(object, p2, p3, p4) := concat("_copy", sp, point(object[:, 0]), sp, sp, point(p2[:, 0]), sp, point(p3[:, 0]), sp, point(p4[:, 0]), sp)
Copy2_Angle(object, p2, p3, p4) := concat("_copy", sp, point(object[:, 0]), sp, sp, point(p2[:, 0]), sp, point(p3[:, 0]), sp, point(p4[:, 0]), sp)
copyDa(p1, p2, p3, p4, p5) := concat("_copy", sp, point(p1[:, 0]), sp, sp, point(p2[:, 0]), sp, point(p3[:, 0]), sp, point(p4[:, 0]), sp, point(p5[:, 0]), sp)
Copy3_Angle(object, p2, p3, p4, p5) := concat("_copy", sp, point(object[:, 0]), sp, sp, point(p2[:, 0]), sp, "@", point(p3[:, 0]), sp, "@", point(p4[:, 0]), sp, "@", point(p5[:, 0]), sp)
copyE(p1, p2, p3, p4, p5, p6) := concat("_copy", sp, point(p1[:, 0]), sp, sp, point(p2[:, 0]), sp, "@", point(p3[:, 0]), sp, "@", point(p4[:, 0]), sp, "@", point(p5[:, 0]), sp, "@", point(p6[:, 0]), sp)
Copy3(object, p2, p3, p4, p5) := concat("_copy", sp, point(object[:, 0]), sp, sp, point(p2[:, 0]), sp, point(p3[:, 0]), sp, point(p4[:, 0]), sp, point(p5[:, 0]), sp)
copyF(p1, p2, p3) := concat("_copy", sp, point(p1[:, 0]), sp, sp, point(p2[:, 0]), sp, "@", point(p3[:, 0]), sp)
Copy4_Angle(object, p2, p3, p4, p5, p6) := concat("_copy", sp, point(object[:, 0]), sp, sp, point(p2[:, 0]), sp, "@", point(p3[:, 0]), sp, "@", point(p4[:, 0]), sp, "@", point(p5[:, 0]), sp, "@", point(p6[:, 0]), sp)
copyG(p1, p2, p3, p4) := concat("_copy", sp, point(p1[:, 0]), sp, point(p2[:, 0]), sp, sp, point(p3[:, 0]), sp, point(p4[:, 0]), sp)
Copy_Angle(object, p2, p3) := concat("_copy", sp, point(object[:, 0]), sp, sp, point(p2[:, 0]), sp, "@", point(p3[:, 0]), sp)
CopyGeneral(PointArraytobeCopied, PointArraytoCopyto, Angle) :=
    Local ← "_copy"
    object ← ""
    dest ← ""
    object ← "all" if PointArraytobeCopied == "all"
    otherwise
        for i ∈ 0 .. last(PointArraytobeCopied)
            object ← concat(object, point(PointArraytobeCopied[i]))
    for n ∈ 0 .. last(PointArraytoCopyto)
        dest ←
            concat(dest, point(PointArraytoCopyto[n]), sp, "@") if ((Angle == "y") and (n < last(PointArraytoCopyto)))
            concat(dest, point(PointArraytoCopyto[n]), sp) otherwise
    Local ← concat(Local, sp, object, sp, sp, dest)
    return Local
copy_all(p1, p2) := concat("_copy", sp, "all", sp, sp, point(p1[:, 0]), sp, "@", point(p2[:, 0]), sp)
Copy_Double(object1, object2, p2, p3) := concat("_copy", sp, point(object1[:, 0]), sp, point(object2[:, 0]), sp, sp, point(p2[:, 0]), sp, point(p3[:, 0]), sp)
Copy_All(p2, p3) := concat("_copy", sp, "all", sp, sp, point(p2[:, 0]), sp, "@", point(p3[:, 0]), sp)
CopyLast(bp, np, Erase) := concat("_copy", sp, "l", sp, sp, point(bp[:, 0]), sp, point(np[:, 0]), sp, Erase, sp, sp)
# Move
Move_Angle(object, p2, p3) := concat("_move", sp, point(object[:, 0]), sp, sp, point(p2[:, 0]), sp, "@", point(p3[:, 0]))
move(p1, p2, p3) := concat("_move", sp, point(p1[:, 0]), sp, sp, point(p2[:, 0]), sp, "@", point(p3[:, 0]))
MoveLast(bp, np) := concat("_move", sp, "l", sp, sp, point(bp[:, 0]), sp, point(np[:, 0]), sp, sp)
Move_All(p2, p3) := concat("_move", sp, "all", sp, sp, point(p2[:, 0]), sp, point(p3[:, 0]))
move_all(p1, p2) := concat("_move", sp, "all", sp, sp, point(p1[:, 0]), sp, point(p2[:, 0]))
Move_AllDisplace(p2) := concat("_move", sp, "all", sp, sp, "d", sp, point(p2[:, 0]))
move_allD(p1) := concat("_move", sp, "all", sp, sp, "d", sp, point(p1[:, 0]))
# Array
Array_Rect(object, nrow, ncol, dist) := concat("-array", sp, point(object[:, 0]), sp, sp, "R", sp, stringit_nounits(nrow), sp, stringit_nounits(ncol), sp, stringit(dist), sp)
array(p1, nrow, ncol, distorifice) := concat("-array", sp, point(p1[:, 0]), sp, sp, "R", sp, stringit_nounits(nrow), sp, stringit_nounits(ncol), sp, stringit(distorifice), sp)
a1 := [1; 2; 3]*m
b1 := [2; 3; 4]*m
b2 := [3; 4; 5]*m
arrayA(p1, p2, nitem, angle) := concat("-array", sp, point(p1[:, 0]), sp, sp, "P", sp, point(p2[:, 0]), sp, stringit_nounits(nitem), sp, stringit_nounits(angle), sp, "Y")
Array_Polar(object, p2, nitem, angle) := concat("-array", sp, point(object[:, 0]), sp, sp, "P", sp, point(p2[:, 0]), sp, stringit_nounits(nitem), sp, stringit_nounits(angle), sp, "Y")
arrayB(p1, nrow, ncol, distorifice) := concat("-array", sp, point(p1[:, 0]), sp, sp, "R", sp, stringit_nounits(nrow), sp, stringit_nounits(ncol), sp, stringit(distorifice))
Array_All(nrow, ncol, dist) := concat("-array", sp, "all", sp, sp, "R", sp, stringit_nounits(nrow), sp, stringit_nounits(ncol), sp, stringit(dist))
array2D(p1, p2, nrow, ncol, drow, dcol) := concat("-array", sp, point(p1[:, 0]), sp, point(p2[:, 0]), sp, sp, "R", sp, stringit_nounits(nrow), sp, stringit_nounits(ncol), sp, stringit(drow), sp, stringit(dcol))
# Array 2d == ?
CopyGeneral([a1], [b1; b2], "y") = "_copy 1,2,3  2,3,4 @3,4,5 "
Array_LastRect(nrow, ncol, dist) := concat("-array", sp, "l", sp, sp, "R", sp, stringit_nounits(nrow), sp, stringit_nounits(ncol), sp, stringit(dist))
array_all(nrow, ncol, dist) := concat("-array", sp, "all", sp, sp, "R", sp, stringit_nounits(nrow), sp, stringit_nounits(ncol), sp, stringit(dist))
Copy_Angle(a1, b1, b2) = "_copy 1,2,3  2,3,4 @3,4,5 "
Array_LastPolar(p2, nitems, angle) := concat("-array", sp, "l", sp, sp, "P", sp, point(p2[:, 0]), sp, stringit_nounits(nitems), sp, stringit_nounits(angle/deg), sp, "Y")
CopyGeneral([a1], [b2; b1], "n") = "_copy 1,2,3  3,4,5 2,3,4 "
ArrayLast(nrow, ncol, dist) := concat("-array", sp, "l", sp, sp, "R", sp, stringit_nounits(nrow), sp, stringit_nounits(ncol), sp, stringit(dist))
Array_Group(nrow, ncol, dist, GroupName) :=
    Local ← concat("-array", sp, "g", sp, GroupName)
    Local ← stack(Local, sp, concat("R", sp, stringit_nounits(nrow), sp, stringit_nounits(ncol), sp, stringit(dist)))
CopyGeneral([a1], [b1; b2], 1) = "_copy 1,2,3  2,3,4 3,4,5 "
ArrayMultiple(PointArray, nrow, ncol, drow, dcol) :=
    Local ← "-array"
    for i ∈ 0 .. last(PointArray)
        Local ← stack(Local, point(PointArray[i]))
    Local ←
        stack(Local, concat(sp, "R", sp, stringit_nounits(nrow), sp, stringit_nounits(ncol), sp, stringit(dcol))) if nrow == 1
        stack(Local, concat(sp, "R", sp, stringit_nounits(nrow), sp, stringit_nounits(ncol), sp, stringit(drow))) if ncol == 1
        stack(Local, concat(sp, "R", sp, stringit_nounits(nrow), sp, stringit_nounits(ncol), sp, stringit(drow), sp, stringit(dcol))) otherwise
    return Local
ArrayLastPolar(RotationPoint, NumItems, Angle) := concat("-array", sp, "l", sp, sp, "P", sp, point(RotationPoint[:, 0]), sp, stringit_nounits(NumItems), sp, stringit_nounits(Angle/deg), sp, "Y")
# Rotate
rotate_3d(p1, p2, axis, ϕ) := concat("_rotate3d", sp, point(p1[:, 0]), sp, sp, axis, sp, point(p2[:, 0]), sp, stringit_nounits(ϕ))
Rotate3D(object, p2, axis, angle) := concat("_rotate3d", sp, point(object[:, 0]), sp, sp, axis, sp, point(p2[:, 0]), sp, stringit_nounits(angle))
Rotate3D_Double(object1, object2, p2, axis, angle) := concat("_rotate3d", sp, point(object1[:, 0]), sp, point(object2[:, 0]), sp, sp, axis, sp, point(p2[:, 0]), sp, stringit_nounits(angle))
rotate_3dA(p1, p2, p3, axis, ϕ) := concat("_rotate3d", sp, point(p1[:, 0]), sp, point(p2[:, 0]), sp, sp, axis, sp, point(p3[:, 0]), sp, stringit_nounits(ϕ))
Rotate(object, angle) := concat("_rotate", sp, point(object[:, 0]), sp, sp, point(object[:, 0]), sp, stringit_nounits(angle))
rotate_3d1(p1, p2, axis, ϕ) := concat("_rotate3d", sp, point(p1[:, 0]), sp, sp, axis, sp, point(p2[:, 0]), sp, stringit_nounits(ϕ), sp)
Rotate_All(object, angle) := concat("_rotate", sp, "all", sp, sp, point(object[:, 0]), sp, stringit_nounits(angle))
rotate(p1, ϕ) := concat("_rotate", sp, point(p1[:, 0]), sp, sp, point(p1[:, 0]), sp, stringit_nounits(ϕ))
Rotate3D_All(object, axis, angle) := concat("_rotate3d", sp, "all", sp, sp, axis, sp, point(object[:, 0]), sp, num2str(90 - angle/deg))
rotate_All(p1, ϕ) := concat("_rotate", sp, "all", sp, sp, point(p1[:, 0]), sp, stringit_nounits(ϕ))
rotate_3dAll(p1, axis, ϕ) := concat("_rotate3d", sp, "all", sp, sp, axis, sp, point(p1[:, 0]), sp, num2str(90 - ϕ/deg))
Rotate_Group(group, axis, p2, angle) := concat("_rotate3d", sp, "g", sp, group, sp, sp, axis, sp, point(p2[:, 0]), sp, num2str(angle/deg))
RotateGroup(GroupName, axis, p1, ϕ) := concat("_rotate3d", sp, "g", sp, GroupName, sp, sp, axis, sp, point(p1[:, 0]), sp, num2str(ϕ/deg))
Rotate3D_Last(p2, axis, angle) := concat("rotate3d", sp, "l", sp, sp, axis, sp, point(p2[:, 0]), sp, stringit_nounits(angle/deg))
Rotate3DLast(RotationPoint, axis, ϕ) := concat("rotate3d", sp, "l", sp, sp, axis, sp, point(RotationPoint[:, 0]), sp, stringit_nounits(ϕ/deg))
# Group
GroupAll(GroupName) :=
    one ← concat("-group", sp, "c", sp, GroupName, sp, "y", sp)
    two ← concat("all", sp)
    three ← stack(one, two)
    three
# The GroupName argument must be given with quotes around it!
# This will only work if the group already exists!
Group(GroupName, p1) :=
    one ← concat("-group", sp, "c", sp, GroupName, sp)
    two ← concat(point(p1[:, 0]), sp)
    return stack(one, two)
GroupSelect(GroupName, ArrayOfPoints) :=
    one ← concat("-group", sp, "c", sp, GroupName, sp, "y", sp)
    for i ∈ 0 .. last(ArrayOfPoints)
        one ← stack(one, point(ArrayOfPoints[i][:, 0]))
    one[last(one)] ← concat(one[last(one)], sp)
    return one
ExplodeGroup(GroupName) := concat("-group", sp, "e", sp, GroupName, sp)
CopyGroup(GroupName, BasePoint, ArrayOfCopyPoints) :=
    one ← concat("_copy", sp, "g", sp, GroupName, sp, sp, point(BasePoint[:, 0]))
    for i ∈ 0 .. last(ArrayOfCopyPoints)
        one ← stack(one, point(ArrayOfCopyPoints[i][:, 0]))
    one ← stack(one, "e")
    return one
GroupAdd(GroupName, ArrayOfGroupsToAdd) :=
    one ← concat("-group", sp, "a", sp, GroupName, sp)
    for i ∈ 0 .. last(ArrayOfGroupsToAdd)
        one ← stack(one, "g", sp, ArrayOfGroupsToAdd[i], sp)
    one ← stack(one, sp)
    return one
SelectionStyle(type) := concat("_pickstyle", sp, stringit_nounits(type))
# type = 1 sets to group selection
# type = 0 sets to individual selection
SubtractGroups(GroupsToSubtractFrom, GroupToSubtract) :=
    local ← "_subtract"
    for i ∈ 0 .. last(GroupsToSubtractFrom)
        local ← stack(local, concat("g", sp, GroupsToSubtractFrom[i]))
    local ← stack(local, concat(sp, "g", sp, GroupToSubtract, sp))
    local
GroupLast(GroupName) :=
    one ← concat("-group", sp, "c", sp, GroupName, sp, "y", sp)
    two ← concat("l", sp)
    three ← stack(one, two)
    three
# Layer
layer_new(title, color) :=
    one ← concat("-layer", sp, "m", sp, title)
    two ← concat("c", sp, "t", sp, point_nounits(color[:, 0]))
    three ← concat(title)
    four ← concat(sp, sp)
    tot ← stack(one, two, three, four)
    return tot
# layer.new is the only one of these layer functions you should be using. Other than that, if you want to edit a frozen layer, use SelectLayer(LayerName). If you want to freeze a layer, use FreezeLayer(LayerName). Both of these functions can be found in the MtoA Translator Wrapped.
layer_set(title) :=
    one ← concat("-layer", sp, "s", sp, title)
    two ← concat(sp, sp)
    tot ← stack(one, two)
    return tot
layer_new1(title, color) :=
    one ← concat("-layer", sp, "m", sp, title)
    two ← concat("c", sp, "c", sp, point_nounits(color[:, 0]))
    three ← concat(title)
    four ← concat(sp, sp)
    tot ← stack(one, two, three, four)
    return tot
layer_freeze(title) :=
    one ← concat("-layer", sp, "f", sp, title)
    two ← concat(sp, sp)
    tot ← stack(one, two)
    return tot
layer_thaw(title) :=
    one ← concat("-layer", sp, "t", sp, title)
    two ← concat(sp, sp)
    tot ← stack(one, two)
    return tot
ThawMultiple(LayerVector) :=
    Local ← concat("-layer", sp, "t", sp, LayerVector[0])
    if last(LayerVector) ≥ 2
        for i ∈ 1 .. last(LayerVector) - 1
            Local ← stack(Local, concat("t", sp, LayerVector[i]))
    return stack(Local, concat("t", sp, LayerVector[last(LayerVector)]), concat(sp, sp))
FreezeMultiple(LayerVector) :=
    Local ← stack(layer_set("0"), concat("-layer", sp, "f", sp, LayerVector[0]))
    if last(LayerVector) ≥ 2
        for i ∈ 1 .. last(LayerVector) - 1
            Local ← stack(Local, concat("f", sp, LayerVector[i]))
    return stack(Local, concat("f", sp, LayerVector[last(LayerVector)]), concat(sp, sp))
# Loft
Loft(p1, p2) :=
    one ← concat("select", sp, point(p1[:, 0]), sp, point(p2[:, 0]), sp, sp, "loft", sp)
    two ← stack(one)
    return two
# Only one of these is likely necessary, they appear to be mostly similar,
# check at implementation level before changing.
Loft2(p1, p2) :=
    one ← concat("loft", sp)
    two ← stack(concat(point(p1[:, 0]), sp, point(p2[:, 0]), sp, sp), one)
    return two
# Pline
pline(p1, p2, p3) := concat("_pline", sp, point(p1[:, 0]), sp, point(p2[:, 0]), sp, point(p3[:, 0]), sp, point(p1[:, 0]), sp)
pline10(p1, p2, p3, p4, p5, p6, p7, p8, p9, p10) := concat("_pline", sp, point(p1[:, 0]), sp, point(p2[:, 0]), sp, point(p3[:, 0]), sp, point(p4[:, 0]), sp, point(p5[:, 0]), sp, point(p6[:, 0]), sp, point(p7[:, 0]), sp, point(p8[:, 0]), sp, point(p9[:, 0]), sp, point(p10[:, 0]), sp, point(p1[:, 0]), sp)
Pline(PointArray) :=
    one ← concat("_pline")
    for i ∈ 0 .. last(PointArray)
        one ← stack(one, point(PointArray[i][:, 0]))
    one[last(one)] ← concat(one[last(one)], sp)
    return one
Pline3D(PointArray) :=
    one ← "3dpoly"
    for i ∈ 0 .. last(PointArray)
        one ← stack(one, point(PointArray[i][:, 0]))
    one[last(one)] ← concat(one[last(one)], sp)
    return one
# Extrude
extrudeA(p1, L, ataper) := concat("_extrude", sp, point(p1[:, 0]), sp, sp, stringit(L), sp, stringit(0), sp, sp)
# The 'ataper' variable doesn't seem to be used.  Check at implementation.
# ataper =? angle of taper
extrude(p1, L) :=
    concat("_extrude", sp, point(p1[:, 0]), sp, sp, stringit(L), sp) if acad_version == 2006
    concat("_extrude", sp, point(p1[:, 0]), sp, sp, stringit(L)) if acad_version == 2008
    concat("_extrude", sp, point(p1[:, 0]), sp, sp, stringit(L)) otherwise
# Erase
EraseAll := concat("_.erase", sp, "all", sp, sp)
# Block
block(title, bp, ip) :=
    one ← concat("-block", sp, title)
    two ← concat(point(bp[:, 0]), sp, "all", sp)
    three ← concat("-insert", sp, title)
    four ← concat(point(ip[:, 0]), sp)
    five ← concat(sp)
    tot ← stack(one, two, three, four, five)
    return tot
# Rectangle
rectangle(rectangle_dim) := concat("_rectangle", sp, point(rectangle_dim[:, 0]), sp, point(rectangle_dim[:, 1]))
# Slice
slice(p1, p2, kp) := concat("_slice", sp, point(p1[:, 0]), sp, sp, "o", sp, point(p2[:, 0]), sp, point(kp[:, 0]))
# These two functions seem to be the same except for the last part, check at implementation
slice_both(p1, p2, kp) := concat("_slice", sp, point(p1[:, 0]), sp, sp, "o", sp, point(p2[:, 0]), sp, "b")
# Explode
explode(p1) := concat("_explode", sp, point(p1[:, 0]), sp)
# Erase
erase(p1) := concat("_erase", sp, point(p1[:, 0]), sp)
# There is an Erase.all function above, it appears to be the same as erase.all here
erase_all := concat("_erase", sp, "all", sp)
# Wedge
wedge(p1, p2, h) := concat("_wedge", sp, point(p1[:, 0]), sp, point(p2[:, 0]), sp, stringit(h))
wedge3d(p1, p2) := concat("_wedge", sp, point(p1[:, 0]), sp, point(p2[:, 0]))
# Circle
circle(OriginPoint, Radius) := concat("c", sp, point(OriginPoint[:, 0]), sp, stringit(Radius), sp)
# Miscellaneous
cleanscreen := concat("_CleanScreenON")
textbox(size, p1, p2, disclaimer) :=
    setsize ← concat("textsize", sp, stringit(size))
    one ← concat("-mtext", sp, point(p1[:, 0]), sp, point(p2[:, 0]), sp, disclaimer)
    two ← concat("")
    total ← stack(setsize, one, two)
    return total
# Insert Block | update to scale in all dimensions!!!
insertdwg(filepath, insertionpoint, Xscalefactor, Yscalefactor, AN_rotation) := stack(concat("-insert", sp, filepath), concat(point(insertionpoint[:, 0]), sp, "x", sp, stringit_nounits(Xscalefactor), sp, stringit_nounits(Yscalefactor), sp, sp, stringit_nounits(AN_rotation/deg)))
# Note: This is preliminary.  This uses a 4 in valve and scales it according to the needs of the plant being drawn.
# Spline
Spline(PointArray) :=
    Spline ← concat("spline", sp, "m", sp, "f", sp, "n", sp, "u", sp)
    for i ∈ 0 .. last(PointArray)
        Spline ← stack(Spline, point(PointArray[i][:, 0]), sp)
    return stack(Spline, sp)
# Sweep
SweepSurface(ShapePoint, PathPoint) :=
    SetSurfaceAssociativity ← concat("surfaceassociativity", sp, "0")
    SetDelObj ← concat("delobj", sp, "2")
    Sweep ← concat("sweep", sp, "mo", sp, "su", sp, point(ShapePoint[:, 0]), sp, sp, point(PathPoint[:, 0]), sp)
    return stack(SetSurfaceAssociativity, SetDelObj, Sweep)
SweepSolid(ShapePoint, PathPoint) :=
    SetSurfaceAssociativity ← concat("surfaceassociativity", sp, "0")
    SetDelObj ← concat("delobj", sp, "2")
    Sweep ← concat("sweep", sp, "mo", sp, "so", sp, point(ShapePoint[:, 0]), sp, sp, point(PathPoint[:, 0]), sp)
    return stack(SetSurfaceAssociativity, SetDelObj, Sweep)
# Arc
Arc(CenterPoint, StartPoint, Angle) := concat("arc", sp, "c", point(CenterPoint[:, 0]), sp, point(StartPoint[:, 0]), sp, "a", sp, Angle, sp)
# Center specifies the center of an imaginary circle (i.e. the pivot point for the start point)
# StartPoint MUST be a 2-D point only!!! | EndPoint is relative to StartPoint NOT the origin.
# Dimension
LinearDim(StartPoint, DistToEndPoint, DimLocation, Orientation) :=
    dim ← concat("dimlinear", sp, point(StartPoint[:, 0]), sp, concat("0,", stringit(DistToEndPoint)), sp, Orientation, sp, concat("@", stringit(DimLocation), "0")) if Orientation == "v"
    dim ← concat("dimlinear", sp, point(StartPoint[:, 0]), sp, concat(stringit(DistToEndPoint), ",0"), sp, Orientation, sp, concat("@0,", stringit(DimLocation))) otherwise
    return dim
