# [reference: EtFlocSedFi.xmcd]
# Mathcad to AutoCAD translators:
# The wrapped MtoA translator contains the functions that the user will want to access. These functions will draw pieces with full functionality - specifying the location, dimension, and orientation of the object. Also, it contains layer control and subtraction capabilities for grouped objects.
# Layers
PVCLayer := layer_new("PVC", ltgrey)
SteelLayer := layer_new("Steel", grey)
SelectPVCLayer := SelectLayer("PVC")
SelectSteelLayer := SelectLayer("Steel")
PVCFrz := FreezeLayer("PVC")
SteelFrz := FreezeLayer("Steel")
ThawPVC := ThawMultiple(["PVC"])
ThawSteel := ThawMultiple(["Steel"])
vscurrentXray := vscurrent("x")
UHoleLayer := layer_new("UHole", grey)
SelectUHoleLayer := SelectLayer("Uhole")
UHoleFrz := FreezeLayer("UHole")
ThawUHole := ThawMultiple(["UHole"])
# Dimensions
OD_ManifoldPipe := 2.375 in = 6.0325 cm
W_Body := 10 cm
T_Body := .75 in = 1.905 cm
OD_SteelLoop := 1.5 cm
H_Body := 20 cm
L_Pin := 1.8 in = 4.572 cm
L_TopOfPinToTop := 1.5 cm
T_Latch := 0.5 in = 1.27 cm
W_Latch := 2.3 cm
D_PinHole := 1/4*in = 0.635 cm
H_Latch := 15 cm
OD_CotterPin := 3/8*in = 0.9525 cm
H_Extend := 10 cm
# Unclear Dimensions
T_CotterHead := 1/16*cm
L_RoundHole := 1.5 cm
Leeway := 1/32*cm
Space := 0.01 cm
# Body
Body_Origin := [0 m; 0 m; 0 m]
Body_FarCorner := [W_Body; H_Body; -T_Body]
BodyBox := Box(Body_Origin, Body_FarCorner)
TopBody_Origin := [0 m; Space + H_Body; 0 m]
TopBody_FarCorner := TopBody_Origin + [W_Body; H_Extend; -T_Body]
TopBodyBox := Box(TopBody_Origin, TopBody_FarCorner)
BottomBody_Origin := [0 m; -Space; 0 m]
BottomBody_FarCorner := BottomBody_Origin + [W_Body; -H_Extend; -T_Body]
BottomBodyBox := Box(BottomBody_Origin, BottomBody_FarCorner)
Safety := 0.75 cm
# Cutting Out Where the Manifold Pipe Fits
# This is assuming 1.5cm does not include radius of pin. Need clarification from Fabrication team.
PipeFit_Origin := [OD_ManifoldPipe/2 + Safety; H_Body - L_TopOfPinToTop - D_PinHole/2; 0 m]
PipeFit := CylinderF(PipeFit_Origin, OD_ManifoldPipe/2, T_Body, [0; -90; 0]*deg)
RemovePVC := SubtractF(["PVC"], "DeleteMe")
PipeFitBottom_Origin := [OD_ManifoldPipe/2 + Safety; -L_TopOfPinToTop - D_PinHole/2; 0 m]
PipeFitBottom := CylinderF(PipeFitBottom_Origin, OD_ManifoldPipe/2, T_Body, [0; -90; 0]*deg)
# Chamfer Blocks: Draw and Subtract
# Need to insert commands that write AutoCAD scripts to chamfer the filter openings for smooth insertion of the pipes. Cannot use any of the chamfer or truncate commands because they require cursor selection, which is difficult to do in AutoCAD scripts meant for command insertion.
Block_Origin := [Safety; H_Body - L_TopOfPinToTop - D_PinHole/2; 0 m]
Block_FarCorner := Block_Origin + [OD_ManifoldPipe; L_TopOfPinToTop + D_PinHole/2; -T_Body]
BlockBox := Box(Block_Origin, Block_FarCorner)
BlockBottom_Origin := [Safety; -L_TopOfPinToTop - D_PinHole/2; 0 m]
BlockBottom_FarCorner := BlockBottom_Origin + [OD_ManifoldPipe; L_TopOfPinToTop + D_PinHole/2; -T_Body]
BlockBottomBox := Box(BlockBottom_Origin, BlockBottom_FarCorner)
# Round Hole position needs to be further clarified.
RoundBlock_Origin := PipeFitBottom_Origin + [0 m; -L_RoundHole/2 - OD_ManifoldPipe/2; 0 m]
RoundBlock := CylinderF(RoundBlock_Origin, L_RoundHole/2, T_Body, [0; -90; 0]*deg)
EdgeBlock_Origin := PipeFitBottom_Origin + [-L_RoundHole/2; -L_RoundHole/2 - OD_ManifoldPipe/2; 0 m]
EdgeBlock_FarCorner := EdgeBlock_Origin + [L_RoundHole; L_RoundHole; -T_Body]
EdgeBlockBox := Box(EdgeBlock_Origin, EdgeBlock_FarCorner)
# Pin Hole
PinHole_Origin := [W_Body - W_Latch/2; H_Body - L_TopOfPinToTop - D_PinHole/2; 0 m]
PinHole := CylinderF(PinHole_Origin, D_PinHole/2 + Leeway, T_Body, [0; -90; 0]*deg)
PinHoleBottom_Origin := [W_Body - W_Latch/2; -L_TopOfPinToTop - D_PinHole/2; 0 m]
PinBottomHole := CylinderF(PinHoleBottom_Origin, D_PinHole/2 + Leeway, T_Body, [0; -90; 0]*deg)
# Cotter Pin
# Should we include a pin head for the cotter pin to show the 3/8" diameter?
Pin_Origin := PinHole_Origin + [0 m; 0 m; (L_Pin - T_Body)/2]
Pin := CylinderF(Pin_Origin, D_PinHole/2, L_Pin, [0; -90; 0]*deg)
CotterHead1 := CylinderF(Pin_Origin, OD_CotterPin/2, -T_CotterHead, [0; -90; 0]*deg)
CotterHead2_Origin := PinHole_Origin + [0 m; 0 m; (-L_Pin - T_Body)/2] = [0.0885; 0.181825; -0.032385] m
CotterHead2 := CylinderF(CotterHead2_Origin, OD_CotterPin/2, T_CotterHead, [0; -90; 0]*deg)
PinBottom_Origin := PinHoleBottom_Origin + [0 m; 0 m; (L_Pin - T_Body)/2]
PinBottom := CylinderF(PinBottom_Origin, D_PinHole/2, L_Pin, [0; -90; 0]*deg)
CotterBotHead1 := CylinderF(PinBottom_Origin, OD_CotterPin/2, -T_CotterHead, [0; -90; 0]*deg)
CotterBotHead2_Origin := PinHoleBottom_Origin + [0 m; 0 m; (-L_Pin - T_Body)/2]
CotterBotHead2 := CylinderF(CotterBotHead2_Origin, OD_CotterPin/2, T_CotterHead, [0; -90; 0]*deg)
# Latch
Latch1_Origin := [W_Body - W_Latch; -H_Latch + 7.4 cm; T_Latch]
Latch1_FarCorner := Latch1_Origin + [W_Latch; H_Latch; -T_Latch]
Latch1 := Box(Latch1_Origin, Latch1_FarCorner)
Latch1B_Origin := Latch1_Origin + [0 m; 0 m; -T_Body - T_Latch]
Latch1B_FarCorner := Latch1B_Origin + [W_Latch; H_Latch; -T_Latch]
Latch1B := Box(Latch1B_Origin, Latch1B_FarCorner)
Latch2_Origin := [W_Body - W_Latch; -H_Latch + 7.4 cm + H_Body; T_Latch]
Latch2_FarCorner := Latch2_Origin + [W_Latch; H_Latch; -T_Latch]
Latch2 := Box(Latch2_Origin, Latch2_FarCorner)
Latch2B_Origin := Latch2_Origin + [0 m; 0 m; -T_Body - T_Latch]
Latch2B_FarCorner := Latch2B_Origin + [W_Latch; H_Latch; -T_Latch]
Latch2B := Box(Latch2B_Origin, Latch2B_FarCorner)
# L Bracket U Holes
UHoleCircle_Origin := [W_Body - W_Latch/2; H_Body - L_TopOfPinToTop - D_PinHole/2; T_Latch]
UHoleCircle := CylinderF(UHoleCircle_Origin, D_PinHole/2 + Leeway, 2*T_Latch + T_Body, [0; -90; 0]*deg)
UHolePrism_Origin := [W_Body - W_Latch/2; H_Body - L_TopOfPinToTop + Leeway; T_Latch]
UHolePrism_FarCorner := UHolePrism_Origin + [-W_Latch/2; -D_PinHole - 2*Leeway; -2*T_Latch - T_Body]
UHolePrism := Box(UHolePrism_Origin, UHolePrism_FarCorner)
UHoleCircleBot_Origin := [W_Body - W_Latch/2; -L_TopOfPinToTop - D_PinHole/2; T_Latch]
UHoleCircleBot := CylinderF(UHoleCircleBot_Origin, D_PinHole/2 + Leeway, 2*T_Latch + T_Body, [0; -90; 0]*deg)
RemoveSteel := SubtractF(["Steel"], "DeleteMe")
UHolePrismBot_Origin := [W_Body - W_Latch/2; -L_TopOfPinToTop + Leeway; T_Latch]
UHolePrismBot_FarCorner := UHolePrismBot_Origin + [-W_Latch/2; -D_PinHole - 2*Leeway; -2*T_Latch - T_Body]
UHolePrismBot := Box(UHolePrismBot_Origin, UHolePrismBot_FarCorner)
# Stack MathCAD Scripts
PVCBody_Script := stack(PVCLayer, BodyBox, sp, TopBodyBox, sp, BottomBodyBox, PVCFrz, SelectPVCLayer, PipeFit, sp, PipeFitBottom, GroupDelete, RemovePVC, PVCFrz, SelectPVCLayer, BlockBox, sp, BlockBottomBox, GroupDelete, RemovePVC, PVCFrz, SelectPVCLayer, RoundBlock, GroupDelete, RemovePVC, PVCFrz, SelectPVCLayer, EdgeBlockBox, GroupDelete, RemovePVC, PVCFrz, SelectPVCLayer, PinHole, GroupDelete, RemovePVC, PVCFrz, SelectPVCLayer, PinBottomHole, GroupDelete, RemovePVC, PVCFrz)
Latch_Script := stack(SteelLayer, Latch1, Union_All, SteelFrz, SelectSteelLayer, Latch1B, Union_All, SteelFrz, SelectSteelLayer, Latch2, Union_All, SteelFrz, SelectSteelLayer, Latch2B, Union_All, SteelFrz, SelectSteelLayer, UHoleCircle, sp, UHoleCircleBot, GroupDelete, RemoveSteel, SteelFrz, SelectSteelLayer, UHolePrism, sp, UHolePrismBot, GroupDelete, RemoveSteel, SteelFrz)
Pin_Script := stack(SteelLayer, Pin, sp, PinBottom, SteelFrz, SelectSteelLayer, CotterHead1, sp, CotterHead2, sp, CotterBotHead1, sp, CotterBotHead2, Union_All, SteelFrz, ThawPVC, ThawSteel, ZoomObject, vscurrentXray)
Spacer_Script := stack(PVCBody_Script, Latch_Script, Pin_Script)
# [component: inputs Spacer_Script]
