# [reference: EtFlocSedFi.xmcd]
# Mathcad to AutoCAD translators:
# The wrapped MtoA translator contains the functions that the user will want to access. These functions will draw pieces with full functionality - specifying the location, dimension, and orientation of the object. Also, it contains layer control and subtraction capabilities for grouped objects.
# Layers
WoodLayer := layer_new("Wood", ltgrey)
SteelLayer := layer_new("Steel", grey)
SelectWoodLayer := SelectLayer("Wood")
SelectSteelLayer := SelectLayer("Steel")
WoodFrz := FreezeLayer("Wood")
SteelFrz := FreezeLayer("Steel")
ThawWood := ThawMultiple(["Wood"])
ThawSteel := ThawMultiple(["Steel"])
RemoveWood := SubtractF(["Wood"], "DeleteMe")
RemoveSteel := SubtractF(["Steel"], "DeleteMe")
vscurrentXray := vscurrent("x")
# Dimensions
W_LBody := 116 cm
W_Steel := 64 cm
T_Body := 5 cm
H_SteelSide := 4 cm
H_Body := 23 cm
T_SteelSide := 0.5 cm
W_RBody := 24 cm
OD_Screw := 0.25 in = 0.635 cm
# Dimensions from AutoCAD
W_LeftHingeScrew := 114.41 cm
H_FirstHingeScrew := 7.13 cm
W_LeftMidHingeScrew := 114.004 cm
H_MidHingeScrew := 4.37 cm
W_HingeScrewCenter := 4.18 cm
W_HingeMidScrewCenter := 4.91 cm
# Undefined Dimensions
T_Hinge := 0.43 cm
W_LeftScrewFit := 80 cm
W_ScrewCentertoCenter := 8 cm
# Left Body
Body_Origin := [0 m; 0 m; 0 m]
LBody_FarCorner := Body_Origin + [W_LBody; H_Body; -T_Body]
LBodyBox := Box(Body_Origin, LBody_FarCorner)
# Right Body
RBody_Origin := [W_LBody + 1 cm; 0 m; 0 m]
RBody_FarCorner := RBody_Origin + [W_RBody; H_Body; -T_Body]
RBodyBox := Box(RBody_Origin, RBody_FarCorner)
# Screw Holes Due to Steel
Safety := 0.001 cm
# L.Screw is arbritary length less than the thickness of the wood but greater than the length of the screw..
L_Screw := H_SteelSide
TopLeftScrewFit_Origin := [W_LeftScrewFit; H_Body - H_SteelSide/2 + T_SteelSide; T_SteelSide]
TopRightScrewFit_Origin := [
    TopLeftScrewFit_Origin[0] + W_ScrewCentertoCenter;
    TopLeftScrewFit_Origin[1];
    TopLeftScrewFit_Origin[2]
]
BottomLeftScrewFit_Origin := [TopLeftScrewFit_Origin[0]; H_SteelSide/2 - T_SteelSide; TopLeftScrewFit_Origin[2]]
BottomRightScrewFit_Origin := [TopRightScrewFit_Origin[0]; BottomLeftScrewFit_Origin[1]; TopLeftScrewFit_Origin[2]]
TopLeftScrew := CylinderF(TopLeftScrewFit_Origin, OD_Screw/2 + Safety, L_Screw, [0; -90; 0]*deg)
TopRightScrew := CylinderF(TopRightScrewFit_Origin, OD_Screw/2 + Safety, L_Screw, [0; -90; 0]*deg)
BottomLeftScrew := CylinderF(BottomLeftScrewFit_Origin, OD_Screw/2 + Safety, L_Screw, [0; -90; 0]*deg)
BottomRightScrew := CylinderF(BottomRightScrewFit_Origin, OD_Screw/2 + Safety, L_Screw, [0; -90; 0]*deg)
# Steel Sides
# Need clarification on documents. Thinking of drawing two boxes and subtracting wth the wooden box in steel layer.kee in mind that the steel components are gapped.
# T.SteelSide is the thickness of the steel and H.SteelSide is the height of the steel on both sides.
SteelStrip_Origin := [W_LBody + W_RBody - W_Steel - 8 cm; T_SteelSide + H_Body; T_SteelSide]
SteelStrip_FarCorner := SteelStrip_Origin + [W_Steel; -H_SteelSide; -H_SteelSide]
SteelStrip := Box(SteelStrip_Origin, SteelStrip_FarCorner)
SteelStrip1_Origin := SteelStrip_Origin + [0; -H_Body + H_SteelSide - 2*T_SteelSide; 0]
SteelStrip1_FarCorner := SteelStrip1_Origin + [W_Steel; -H_SteelSide; -H_SteelSide]
SteelStrip1 := Box(SteelStrip1_Origin, SteelStrip1_FarCorner)
OmitBox := Box(Body_Origin, RBody_FarCorner)
OD_HeadScrew := OD_Screw + 0.6 cm = 0.01235 m
TopLeftHeadScrew := CylinderF(TopLeftScrewFit_Origin, OD_HeadScrew/2, T_SteelSide, [0; -90; 0]*deg)
TopRightHeadScrew := CylinderF(TopRightScrewFit_Origin, OD_HeadScrew/2, T_SteelSide, [0; -90; 0]*deg)
BottomLeftHeadScrew := CylinderF(BottomLeftScrewFit_Origin, OD_HeadScrew/2, T_SteelSide, [0; -90; 0]*deg)
BottomRightHeadScrew := CylinderF(BottomRightScrewFit_Origin, OD_HeadScrew/2, T_SteelSide, [0; -90; 0]*deg)
# Hinge
H_actualHinge := 12.73 cm
Hinge_Origin := [W_LBody + 0.5 cm; (H_Body - H_actualHinge)/2; -T_Body - T_Hinge]
Hinge := insertdwg("https://confluence.cornell.edu/download/attachments/173604905/3%20Hole%20Hinge.dwg?version=1&modificationDate=1462992553049&api=v2", Hinge_Origin, 4.62/100, 4.62/100, 0 deg)
RotateHinge := Rotate3DLast(Hinge_Origin, "X", 90 deg)  # The screws are ordered first to third so that the points are closest to x axis.
RotateHinge2 := Rotate3DLast(Hinge_Origin, "Y", 180 deg)
RotateHinge3 := Rotate3DLast(Hinge_Origin, "Z", 90 deg)
LeftScrew1_Origin := [W_LeftHingeScrew; H_FirstHingeScrew; -T_Body - T_Hinge]
RightScrew1_Origin := [LeftScrew1_Origin[0] + W_HingeScrewCenter; LeftScrew1_Origin[1]; LeftScrew1_Origin[2]]
LeftScrew2_Origin := [W_LeftMidHingeScrew; LeftScrew1_Origin[1] + H_MidHingeScrew; LeftScrew1_Origin[2]]
RightScrew2_Origin := [LeftScrew2_Origin[0] + W_HingeMidScrewCenter; LeftScrew2_Origin[1]; LeftScrew1_Origin[2]]
LeftScrew3_Origin := [LeftScrew1_Origin[0]; LeftScrew2_Origin[1] + H_MidHingeScrew; LeftScrew1_Origin[2]]
RightScrew3_Origin := [RightScrew1_Origin[0]; LeftScrew3_Origin[1]; LeftScrew1_Origin[2]]
# Screw Holes Due to Hinge
LeftScrew1 := CylinderF(LeftScrew1_Origin, OD_Screw/2 + Safety, -L_Screw, [0; -90; 0]*deg)
RightScrew1 := CylinderF(RightScrew1_Origin, OD_Screw/2 + Safety, -L_Screw, [0; -90; 0]*deg)
LeftScrew2 := CylinderF(LeftScrew2_Origin, OD_Screw/2 + Safety, -L_Screw, [0; -90; 0]*deg)
RightScrew2 := CylinderF(RightScrew2_Origin, OD_Screw/2 + Safety, -L_Screw, [0; -90; 0]*deg)
LeftScrew3 := CylinderF(LeftScrew3_Origin, OD_Screw/2 + Safety, -L_Screw, [0; -90; 0]*deg)
RightScrew3 := CylinderF(RightScrew3_Origin, OD_Screw/2 + Safety, -L_Screw, [0; -90; 0]*deg)
# Insert Screws
# Steel and Wood
TopLeftScrewFit := insertdwg("https://confluence.cornell.edu/download/attachments/173604905/Screw_st3x5x25cm.dwg?version=1&modificationDate=1463519419752&api=v2", TopLeftScrewFit_Origin, 4.045/100, 4.045/100, 0 deg)
RotateTopLeftFit := Rotate3DLast(TopLeftScrewFit_Origin, "Y", 90 deg)
TopRightScrewFit := insertdwg("https://confluence.cornell.edu/download/attachments/173604905/Screw_st3x5x25cm.dwg?version=1&modificationDate=1463519419752&api=v2", TopRightScrewFit_Origin, 4.045/100, 4.045/100, 0 deg)
RotateTopRightFit := Rotate3DLast(TopRightScrewFit_Origin, "Y", 90 deg)
BottomLeftScrewFit := insertdwg("https://confluence.cornell.edu/download/attachments/173604905/Screw_st3x5x25cm.dwg?version=1&modificationDate=1463519419752&api=v2", BottomLeftScrewFit_Origin, 4.045/100, 4.045/100, 0 deg)
RotateBottomLeftFit := Rotate3DLast(BottomLeftScrewFit_Origin, "Y", 90 deg)
BottomRightScrewFit := insertdwg("https://confluence.cornell.edu/download/attachments/173604905/Screw_st3x5x25cm.dwg?version=1&modificationDate=1463519419752&api=v2", BottomRightScrewFit_Origin, 4.045/100, 4.045/100, 0 deg)
RotateBottomRightFit := Rotate3DLast(BottomRightScrewFit_Origin, "Y", 90 deg)
# Hinge
LeftScrew1Fit := insertdwg("https://confluence.cornell.edu/download/attachments/173604905/Screw_st3x5x25cm.dwg?version=1&modificationDate=1463519419752&api=v2", LeftScrew1_Origin, 4.045/100, 4.045/100, 0 deg)
RotateLeftScrewFit := Rotate3DLast(LeftScrew1_Origin, "Y", 270 deg)
LeftScrew2Fit := insertdwg("https://confluence.cornell.edu/download/attachments/173604905/Screw_st3x5x25cm.dwg?version=1&modificationDate=1463519419752&api=v2", LeftScrew2_Origin, 4.045/100, 4.045/100, 0 deg)
RotateLeftScrew2Fit := Rotate3DLast(LeftScrew2_Origin, "Y", 270 deg)
LeftScrew3Fit := insertdwg("https://confluence.cornell.edu/download/attachments/173604905/Screw_st3x5x25cm.dwg?version=1&modificationDate=1463519419752&api=v2", LeftScrew3_Origin, 4.045/100, 4.045/100, 0 deg)
RotateLeftScrew3Fit := Rotate3DLast(LeftScrew3_Origin, "Y", 270 deg)
RightScrew1Fit := insertdwg("https://confluence.cornell.edu/download/attachments/173604905/Screw_st3x5x25cm.dwg?version=1&modificationDate=1463519419752&api=v2", RightScrew1_Origin, 4.045/100, 4.045/100, 0 deg)
RotateRightScrewFit := Rotate3DLast(RightScrew1_Origin, "Y", 270 deg)
RightScrew2Fit := insertdwg("https://confluence.cornell.edu/download/attachments/173604905/Screw_st3x5x25cm.dwg?version=1&modificationDate=1463519419752&api=v2", RightScrew2_Origin, 4.045/100, 4.045/100, 0 deg)
RotateRightScrew2Fit := Rotate3DLast(RightScrew2_Origin, "Y", 270 deg)
RightScrew3Fit := insertdwg("https://confluence.cornell.edu/download/attachments/173604905/Screw_st3x5x25cm.dwg?version=1&modificationDate=1463519419752&api=v2", RightScrew3_Origin, 4.045/100, 4.045/100, 0 deg)
RotateRightScrew3Fit := Rotate3DLast(RightScrew3_Origin, "Y", 270 deg)
# Stack MathCAD Scripts
WoodBody_Script := stack(WoodLayer, LBodyBox, WoodFrz, SelectWoodLayer, RBodyBox, WoodFrz, SelectWoodLayer, TopLeftScrew, sp, TopRightScrew, sp, BottomLeftScrew, sp, BottomRightScrew, sp, LeftScrew1, sp, LeftScrew2, sp, LeftScrew3, sp, RightScrew1, sp, RightScrew2, sp, RightScrew3, GroupDelete, RemoveWood, WoodFrz)
SteelBody_Script := stack(SteelLayer, SteelStrip, sp, SteelStrip1, SteelFrz, SelectSteelLayer, OmitBox, GroupDelete, RemoveSteel, SteelFrz, SelectSteelLayer, TopLeftHeadScrew, sp, TopRightHeadScrew, sp, BottomLeftHeadScrew, sp, BottomRightHeadScrew, GroupDelete, RemoveSteel, SteelFrz)
HingeBody_Script := stack(SelectSteelLayer, Hinge, RotateHinge, RotateHinge2, RotateHinge3, SteelFrz)
ScrewBody_Script := stack(SelectSteelLayer, TopLeftScrewFit, RotateTopLeftFit, TopRightScrewFit, RotateTopRightFit, BottomLeftScrewFit, RotateBottomLeftFit, BottomRightScrewFit, RotateBottomRightFit, LeftScrew1Fit, RotateLeftScrewFit, LeftScrew2Fit, RotateLeftScrew2Fit, LeftScrew3Fit, RotateLeftScrew3Fit, RightScrew1Fit, RotateRightScrewFit, RightScrew2Fit, RotateRightScrew2Fit, RightScrew3Fit, RotateRightScrew3Fit, SteelFrz)
Platform_Script := stack(WoodBody_Script, SteelBody_Script, HingeBody_Script, ScrewBody_Script, ZoomObject, ThawSteel, ThawWood)
# [component: inputs Platform_Script]
