# [reference: MasterProgram.xmcd]
# [reference: AlumstockCylinder lxa3.xmcd]
# ALUM PLATFORM
# ASSUMPTIONS
S_BetweenTanks := 20 cm  # Distance between alum tanks
S_TankBorder := 25 cm  # Distance between a tank and the border of the platform
S_Operator := 1 m
# Distance between the tanks and the stairs.
# Space for operator mobility.
# ORIGIN POINTS
Ap_Origin := [
    AlumTank1_origin[0] - (R_AlumTank + T_ChemTankWall) - S_TankBorder;
    AlumTank1_origin[1] - 2*(R_AlumTank + T_ChemTankWall) - S_BetweenTanks - 2*S_TankBorder;
    AlumTank1_origin[2]
]
# The platform origin is located in the left corner at the back (where there are not stairs)
Stairs_Origin := [
    Ap_Origin[0];
    Ap_Origin[1] + 2*(R_AlumTank + T_ChemTankWall) + S_TankBorder + S_Operator;
    AlumTank1_origin[2]
]
# The stairs origin is located in the left corner at the front of the platform
Stairs_OriginSS :=
    if EN_PlantDrains == 0
        [
            Ap_Origin[0] + 2*(R_AlumTank + T_ChemTankWall) + S_TankBorder + S_Operator;
            AlumTank1_origin[1] + (R_AlumTank + T_ChemTankWall) + S_TankBorder;
            AlumTank1_origin[2]
        ]
    otherwise
        [
            Ap_Origin[0];
            Ap_Origin[1] + 2*(R_AlumTank + T_ChemTankWall) + S_TankBorder + S_Operator;
            AlumTank1_origin[2]
        ]
# DIMENSION POINTS
Ap_Dimensions := [
    2*S_TankBorder + (4*R_AlumTank + 4*T_ChemTankWall) + S_BetweenTanks;
    2*(R_AlumTank + T_ChemTankWall) + S_TankBorder + S_Operator;
    -AlumTank1_origin[2] - T_PlantWall
]
H_Total := AlumTank1_origin[2] + T_PlantWall
W_Total := Ap_Dimensions[1]
# PLATFORM SCRIPT
ApScript :=
    AlumPlatformLayer ← layer_new("AlumPlatform", grey)
    PlatformBox ← BoxF(Ap_Origin, Ap_Origin + Ap_Dimensions, [0; 0; 0]*deg)
    FreezePlatformBox ← FreezeLayer("AlumPlatform")
    return stack(AlumPlatformLayer, PlatformBox, FreezePlatformBox)
StairsScript :=
    ApStairs ← SelectLayer("AlumPlatform")
    Stairs ← Stairs(Stairs_Origin, W_Total, H_Total, 180 deg)
    FreezeApStairs ← FreezeLayer("AlumPlatform")
    return stack(ApStairs, Stairs, FreezeApStairs)
StairsScriptSS :=
    ApStairs ← SelectLayer("AlumPlatform")
    Stairs ←
        Stairs(Stairs_Origin, W_Total, H_Total, 0 deg) if EN_PlantDrains == 0
        Stairs(Stairs_Origin, W_Total, H_Total, 90 deg) otherwise
    FreezeApStairs ← FreezeLayer("AlumPlatform")
    return stack(ApStairs, Stairs, FreezeApStairs)
# DRAIN WALKWAY
# ASSUMPTIONS
S_Walkway := 50 cm  # Distance from the top border of the wall
H_Walkway := 30 cm  # Thickness of the walkway (z dimension)
W_Walkway := 1.5 m  # Walkway width, walking area (x dimension)
# ORIGIN POINTS
Walkway_Origin :=
    [Plant_Origin[0] - T_PlantWall - L_Sed; Plant_Origin[1]; H_Sed - S_Walkway] if EN_PlantDrains == 0
    [Plant_Origin[0] + T_PlantWall + W_Walkway; Plant_Origin[1]; H_Sed - S_Walkway] otherwise
# The walkway origin is located at the left corner of the Sed Tank (Opposite corner to the plant origin), outside the wall.
SedDrainboxes_Origin :=
    for i ∈ N_SedBays - 1
        if EN_PlantDrains == 0
            [
                Plant_Origin[0] - T_PlantWall - L_Sed;
                W_SedBay*(N_SedBays - i) - 0.5*W_SedBay - D_SedDrainValve;
                W_Sed - S_Walkway
            ]
        otherwise
            [
                Plant_Origin[0] + T_PlantWall;
                W_SedBay*(N_SedBays - i) - 0.5*W_SedBay - D_SedDrainValve;
                W_Sed - S_Walkway
            ]
FlocDrainboxes_Origin :=
    for j ∈ last(Y_FlocDrainValves)
        [Plant_Origin[0] - T_PlantWall - L_Sed; Y_FlocDrainValves[j] - D_FlocValve; W_Sed - S_Walkway] if EN_PlantDrains == 0
        [Plant_Origin[0] + T_PlantWall; Y_FlocDrainValves[j] - D_FlocValve; W_Sed - S_Walkway] otherwise
# DIMENSION POINTS
Walkway_Dimensions := [
    -W_Walkway;
    (W_FlocChannel*N_FlocChannels) + (T_PlantWall*(N_FlocChannels + 1)) + N_SedTanks*W_Sed + T_PlantWall*(N_SedTanks - 1);
    H_Walkway
]  # Includes the width of all Sed and Floc tanks in one long walkway.
Drainboxes_Dimensions :=
    [-3*D_SedDrainValve; 2*D_SedDrainValve; H_Walkway] if EN_PlantDrains == 0
    [3*D_SedDrainValve; 2*D_SedDrainValve; H_Walkway] otherwise
FlocDrainboxes_Dimensions :=
    [-3*D_FlocValve; 2*D_FlocValve; H_Walkway] if EN_PlantDrains == 0
    [3*D_FlocValve; 2*D_FlocValve; H_Walkway] otherwise
# WALKWAY SCRIPT
Walkway_Script :=
    WalkwayLayer ← layer_new("Walkway", grey)
    WalkwayBox ← BoxF(Walkway_Origin, Walkway_Origin + Walkway_Dimensions, [0; 0; 0]*deg)
    FreezeWalkwayBox ← FreezeLayer("Walkway")
    Total ← stack(WalkwayLayer, WalkwayBox, FreezeWalkwayBox)
    for i ∈ 0 .. N_SedBays - 1
        Total ← stack(Total, BoxF(SedDrainboxes_Origin, SedDrainboxes_Origin + Drainboxes_Dimensions, [0; 0; 0]*deg))
    Total ← stack(Total, array_all(N_SedTanks, 1, W_SedBay*N_SedBays + T_PlantWall)) if N_SedTanks ≠ 1
    for j ∈ 0 .. last(Y_FlocDrainValves)
        Total ← stack(Total, BoxF(FlocDrainboxes_Origin, FlocDrainboxes_Origin + FlocDrainboxes_Dimensions, [0; 0; 0]*deg))
    Group ← GroupAll("DeleteMe")
    Subtract ← SubtractF(["Walkway"], "DeleteMe")
    Final ← stack(Total, Group, Subtract)
AC_OperatorAccess := stack(ApScript, StairsScript, Walkway_Script)
# [component: inputs AC_OperatorAccess]
