H_Walkway := 50 cm  # Distance from the top border of the wall
# COAGULANT PLATFORM
# ASSUMPTIONS
S_BetweenTanks := R_CoagTank  # Distance between alum tanks
# DIMENSION POINTS
Ap_Dimensions := [
    (4*R_CoagTank + 4*T_ChemTankWall) + 3*S_BetweenTanks;
    2*(R_CoagTank + T_ChemTankWall) + S_ChemTankBorder + S_Operator;
    -(CoagTank_Origin[2] - T_ChemTankWall - (H_Sed - H_Walkway))
]
H_CoagStairs := CoagTank_Origin[2] - T_ChemTankWall - (H_Sed - H_Walkway)
W_CoagStairs := Ap_Dimensions[1]
# ORIGIN POINTS
Ap_Origin := [
    CoagTank_Origin[0] - 3*(R_CoagTank + T_ChemTankWall) - 2*S_BetweenTanks;
    Et_Origin[1] - T_PlantWall;
    CoagTank_Origin[2] - T_ChemTankWall
]  # The platform origin is located in the left corner at the back (where there are not stairs)
# The stairs origin is located in the left corner at the front of the platform
Stairs_Origin := Ap_Origin
# PLATFORM SCRIPT
AlumPlatformLayer := layer_new("OpCoagplatformCon", grey)
PlatformStairs := Stairs(Stairs_Origin, W_CoagStairs, H_CoagStairs, 180 deg)
PlatformBox := BoxF(Ap_Origin, Ap_Origin + Ap_Dimensions, [0; 0; 0]*deg)
# If the number of flocculator channels is even,
# the platform will be mirrored.
Mirror := Mirror3dAll("YZ", [Plant_Origin[0] - 1/2*L_Sed; 0 m; 0 m], "Y")
FreezePlatformBox := FreezeLayer("OpCoagplatformCon")
ApScript :=
    stack(AlumPlatformLayer, PlatformStairs, PlatformBox, FreezePlatformBox) if mod(N_FlocChannels, 2) == 0
    stack(AlumPlatformLayer, PlatformStairs, PlatformBox, Mirror, FreezePlatformBox) otherwise
# DRAIN WALKWAY
# Walkway 1 (the walkway on the right side of the plant)
# ASSUMPTIONS
# Distance between the tanks and the stairs.
# Space for operator mobility.
S_Operator := .5 m
H_Walkway := 50 cm  # Distance from the top border of the wall
# T.Walkway is driven from the Stairs function
# Ho_Stairs ← 20 cm
# N_Stairs ← round(H_Total/Ho_Stairs)
# H_Stairs ← H_Total/N_Stairs
# The reason of this step is that in the Stairs file, H.Stairs is embedded in a function.
T_Walkway :=
    Ho_Stairs ← 20 cm
    N_Stairs ← round(H_CoagStairs/Ho_Stairs)
    H_Stairs ← H_CoagStairs/N_Stairs
    return H_Stairs
W_Walkway := 1 m  # Walkway width, walking area (x dimension)
# ORIGIN POINTS
Walkway_Origin := [Plant_Origin[0] + T_PlantWall; Plant_Origin[1]; H_Sed - H_Walkway]
# The walkway origin is located at the left corner of the Sed Tank (Opposite corner to the plant origin), outside the wall.
# DIMENSION POINTS
Walkway_Dimensions := [
    W_Walkway;
    N_SedTanks*(W_Sed + T_PlantWall) + (N_FlocChannels*(W_FlocChannel + T_PlantWall)) + W_EtWalkway + CouplingLength(ND_RMPipe) + ElbowRadius(ND_RMPipe) + ShortTeeLength(ND_RMPipe) - T_PlantWall + W_Et;
    T_Walkway
]
Drainboxes_Dimensions := [4*D_SedDrainValve; 2*D_SedDrainValve; T_Walkway]
FlocDrainboxes_Dimensions := [4*D_FlocValve; 2*D_FlocValve; T_Walkway]
# WALKWAY SCRIPT
WalkwayLayer := layer_new("OpWalkwayCon", grey)
WalkwayBox := BoxF(Walkway_Origin, Walkway_Origin + Walkway_Dimensions, [0; 0; 0]*deg)
FreezeWalkway := FreezeLayer("OpWalkwayCon")
DrainBoxes :=
    for i ∈ 0 .. N_SedBays - 1
        Total ← BoxF([
            Plant_Origin[0] + T_PlantWall;
            W_SedBay*(N_SedBays - i) - 0.5*W_SedBay - D_SedDrainValve;
            Walkway_Origin[2]
        ], [
            Plant_Origin[0] + T_PlantWall;
            W_SedBay*(N_SedBays - i) - 0.5*W_SedBay - D_SedDrainValve;
            Walkway_Origin[2]
        ] + Drainboxes_Dimensions, [0; 0; 0]*deg)
    Total ← stack(Total, array_all(N_SedTanks, 1, W_SedBay*N_SedBays + T_PlantWall)) if N_SedTanks ≠ 1
    for j ∈ 0 .. last(Y_FlocDrainValves)
        Total ← stack(Total, BoxF([Plant_Origin[0] + T_PlantWall; Y_FlocDrainValves[j] - D_FlocValve; Walkway_Origin[2]], [Plant_Origin[0] + T_PlantWall; Y_FlocDrainValves[j] - D_FlocValve; Walkway_Origin[2]] + FlocDrainboxes_Dimensions, [0; 0; 0]*deg))
    return Total
Group := GroupAll("DeleteMe")
Subtract := SubtractF(["OpWalkwayCon"], "DeleteMe")
Walkway_Script := stack(WalkwayLayer, WalkwayBox, FreezeWalkway, DrainBoxes, Group, Subtract)
# COAGULANT PLATFORM
# ASSUMPTIONS
S_BetweenTanks := R_CoagTank  # Distance between alum tanks
# DIMENSION POINTS
Ap_Dimensions := [
    (4*R_CoagTank + 4*T_ChemTankWall) + 3*S_BetweenTanks;
    2*(R_CoagTank + T_ChemTankWall) + S_ChemTankBorder + S_Operator;
    -(CoagTank_Origin[2] - T_ChemTankWall - (H_Sed - H_Walkway))
]
H_CoagStairs := CoagTank_Origin[2] - T_ChemTankWall - (H_Sed - H_Walkway)
W_CoagStairs := Ap_Dimensions[1]
# ORIGIN POINTS
Ap_Origin := [
    CoagTank_Origin[0] - 3*(R_CoagTank + T_ChemTankWall) - 2*S_BetweenTanks;
    Et_Origin[1] - T_PlantWall;
    CoagTank_Origin[2] - T_ChemTankWall
]  # The platform origin is located in the left corner at the back (where there are not stairs)
# The stairs origin is located in the left corner at the front of the platform
Stairs_Origin := Ap_Origin
# PLATFORM SCRIPT
AlumPlatformLayer := layer_new("OpCoagplatformCon", grey)
PlatformStairs := Stairs(Stairs_Origin, W_CoagStairs, H_CoagStairs, 180 deg)
PlatformBox := BoxF(Ap_Origin, Ap_Origin + Ap_Dimensions, [0; 0; 0]*deg)
# If the number of flocculator channels is even,
# the platform will be mirrored.
Mirror := Mirror3dAll("YZ", [Plant_Origin[0] - 1/2*L_Sed; 0 m; 0 m], "Y")
FreezePlatformBox := FreezeLayer("OpCoagplatformCon")
ApScript :=
    stack(AlumPlatformLayer, PlatformStairs, PlatformBox, FreezePlatformBox) if mod(N_FlocChannels, 2) == 0
    stack(AlumPlatformLayer, PlatformStairs, PlatformBox, Mirror, FreezePlatformBox) otherwise
# CHLORINE TANK PLATFORM
# ASSUMPTIONS
S_BetweenTanksChlorine := R_ChlorineTank
ChlorineTank_Origin := [
    Plant_Origin[0] + 2.5*T_PlantWall + R_ChlorineTank;
    Plant_Origin[1] + T_ChemTankWall + R_ChlorineTank - 2/3*S_Walkway;
    CoagTank_Origin[2]
]
# DIMENSION POINTS
Cp_Dimensions := [
    2*(R_ChlorineTank + T_ChemTankWall) + S_ChemTankBorder + S_Operator;
    (4*R_ChlorineTank + 4*T_ChemTankWall) + 3*S_BetweenTanksChlorine;
    -(ChlorineTank_Origin[2] - T_ChemTankWall - (H_Sed - H_Walkway))
]
H_ChlorineTotal := ChlorineTank_Origin[2] - T_ChemTankWall - (H_Sed - H_Walkway)
W_ChlorineTotal := Cp_Dimensions[1]
# ORIGIN POINTS
# Walkway1 Origin was used to define the chlorine tanks platform origin.
Cp_Origin := [Walkway_Origin[0]; Walkway_Origin[1] - Cp_Dimensions[1]; ChlorineTank_Origin[2] - T_ChemTankWall]
Stairs_ChlorineOrigin := [Cp_Dimensions[0] + Cp_Origin[0]; Cp_Origin[1] + Cp_Dimensions[1]; Cp_Origin[2]]
# PLATFORM SCRIPT
ChlorinePlatformLayer := layer_new("OpChlorineplatformCon", grey)
ChlorineStairs := Stairs(Stairs_ChlorineOrigin, W_ChlorineTotal, H_ChlorineTotal, 0 deg)
ChlorinePlatformBox := BoxF(Cp_Origin, Cp_Origin + Cp_Dimensions, [0; 0; 0]*deg)
FreezeChlorinePlatformBox := FreezeLayer("OpChlorineplatformCon")
CpScript := stack(ChlorinePlatformLayer, ChlorineStairs, ChlorinePlatformBox, FreezeChlorinePlatformBox)
# Floor
# Stair base floor (In Front of the Coagulant Stairs)
ASSUMPTIONS
W_Stairs := 30 cm
Ho_Stairs := 20 cm
N_Stairs := round(H_CoagStairs/Ho_Stairs)
L_Stairs := N_Stairs*W_Stairs
# ORIGIN POINTS
Floor_Origin := [Ap_Origin[0] - L_Stairs - 2 m; Ap_Origin[1]; H_Sed - H_Walkway]
# DIMENSIONS
Floor_Dimensions := [2 m; Ap_Dimensions[1]; T_Walkway]
# FLOOR SCRIPT
ThawFloor := SelectLayer("OpWalkwayCon")
FloorBox := BoxF(Floor_Origin, Floor_Origin + Floor_Dimensions, [0; 0; 0]*deg)
Floor_Script := stack(ThawFloor, FloorBox)
# ENTRANCE TANK WALKWAY
# Walkway 2 (Next to the entrance tank)
# ASSUMPTIONS
# the walkway is set to 1.5m
# ORIGIN POINTS:
Walkway2_Origin := [Plant_Origin[0] + T_PlantWall; Et_Origin[1] - T_PlantWall; H_Sed - H_Walkway]
# DIMENSION POINTS:
Walkway2_Dimensions := [
    -L_Et - 2*T_PlantWall - Ap_Dimensions[0] - L_Stairs - 2 m;
    -Et_Origin[1] + (Plant_Origin[1] + W_SedBay*N_SedBays*N_SedTanks + W_FlocChannel*N_FlocChannels + (N_SedTanks + N_FlocChannels + 1)*T_PlantWall);
    T_Walkway
]
# WALKWAY2 SCRIPT
ThawWalkwayLayer := SelectLayer("OpWalkwayCon")
Walkway2Box := BoxF(Walkway2_Origin, Walkway2_Origin + Walkway2_Dimensions, [0; 0; 0]*deg)
FreezeWalkway2 := FreezeLayer("OpWalkwayCon")
Walkway2_Script := stack(ThawWalkwayLayer, Walkway2Box, FreezeWalkway2)
# PIPE PATH
# space for the RM Pipe going through the walkway
# ORIGIN POINT
PipePath_Origin := [RMTee_Origin[0] - ID_RMPipe; Et_Origin[1] - T_PlantWall; Walkway2_Origin[2]]
# DIMENSION POINTS:
PipePath_Dimensions := [2*ID_RMPipe; -3*ID_RMPipe; T_Walkway]
# PIPE PATH SCRIPT
PipePathBox := BoxF(PipePath_Origin, PipePath_Origin + PipePath_Dimensions, [0; 0; 0]*deg)
Group := GroupAll("DeleteMe")
Subtract := SubtractF(["OpWalkwayCon"], "DeleteMe")
PipePath_Script := stack(PipePathBox, Group, Subtract)
# WALKWAY 3
# Flocculator Walkway/Floor (Below the Coag tank)
# ORIGIN POINTS
Walkway3_Origin := [Floor_Origin[0]; Floor_Origin[1] + Walkway2_Dimensions[1]; H_Sed - H_Walkway]
# DIMENSIONS
Walkway3_Dimensions := [
    Floc_Origin[0] - Wall_Dim[0] - Floor_Origin[0] + T_PlantWall;
    -TotalFloc_Dim[1] - Wall_Dim[1] - T_PlantWall;
    T_Walkway
]
# WALKWAY3 SCRIPT
Walkway3_Script := BoxF(Walkway3_Origin, Walkway3_Origin + Walkway3_Dimensions, [0; 0; 0]*deg)
# WALKWAY 4
# Sedimentation Tank Walkway/Floor
# ORIGIN POINTS
Walkway4_Origin := [Plant_Origin[0] - L_Sed - T_PlantWall; Plant_Origin[1]; H_Sed - H_Walkway]
# DIMENSIONS
Walkway4_Dimensions := [Floor_Origin[0] - Walkway4_Origin[0]; N_SedTanks*W_Sed + (N_SedTanks - 1)*T_PlantWall; T_Walkway]
# Note: check the y dimension of sedimentation tank
# WALKWAY4 SCRIPT
Walkway4_Script := BoxF(Walkway4_Origin, Walkway4_Origin + Walkway4_Dimensions, [0; 0; 0]*deg)
# Union All Walkways and Floors
UnionTotal := Union_All
FreezeAll := FreezeLayer("OpWalkwayCon")
AC_OperatorAccess := stack(ApScript, Walkway_Script, Walkway2_Script, PipePath_Script, CpScript, Floor_Script, Walkway3_Script, Walkway4_Script, UnionTotal, FreezeAll)
