# Operator Access
# Layers
OpWalkwayLayer := layer_new("OpWalkwayCon", grey)
SelectOpWalkway := SelectLayer("OpWalkwayCon")
OpWalkwayFrz := FreezeLayer("OpWalkwayCon")
SubtractFromOpWalkway := SubtractF(["OpWalkwayCon"], "DeleteMe")
OpWalkwaySubLayer := layer_new("OpWalkwaySub", red)
SelectOpWalkwaySub := SelectLayer("OpWalkwaySub")
OpWalkwaySubFrz := FreezeLayer("OpWalkwaySub")
# Main floor
Floor_Origin := [
    Plant_Origin[0] + T_SedWall - T_PlantWall;
    Plant_Origin[1] - T_SedWall + T_PlantWall;
    Z_Walkway - T_PlantFloor
]
Floor_Dim := [
    -(Plant_Origin[0] + T_SedWall - T_PlantWall - (Fi_origin[0] - L_Fi - T_FiWall + T_PlantWall));
    T_SedWall - T_PlantWall + N_SedTanks*W_Sed + (N_SedTanks - 1)*T_SedDividingWall + max(T_SedWall, T_FlocWall) + W_Floc + T_FlocWall + W_EtWalkway;
    T_PlantFloor
]
FloorBox := BoxF(Floor_Origin, Floor_Origin + Floor_Dim, [0; 0; 0]*deg)
PlantFloorScript := stack(OpWalkwayLayer, FloorBox, OpWalkwayFrz)
# Stairs to door and basement
mirrorLast :=
    mir ← Mirror3dLast("yz", mirrorpt, "y") if N_Train > 1
    mir ← "" otherwise
    return mir
# Dimensions and origins
L_EntranceLanding := 2 m
L_BasementLandingMin := 1 m
L_EntranceStairs := FiInletChannel_Origin[0] + T_FiBoxWall - Fi_origin[0] + L_Fi + (T_FiWall - T_PlantWall) - L_EntranceLanding
H_EntranceStairs := H_Stairs(L_EntranceStairs)
Z_Entrance := Z_Walkway - H_EntranceStairs
Z_BasementFloor := Z_FiBottom
H_BasementStairs := Z_Entrance - Z_BasementFloor
L_BasementStairs := min(L_EntranceStairs - L_BasementLandingMin - T_DrainChannelWall, L_Stairs(H_BasementStairs))
L_BasementLanding := L_EntranceStairs - L_BasementStairs - T_DrainChannelWall
EntranceStairs_Origin := [
    FiInletChannel_Origin[0] + T_FiBoxWall;
    Fi_origin[1] + N_Fi*(W_Fi + T_FiWall) + W_BasementStairs + T_PlantWall;
    Z_Walkway
]
BasementStairs_Origin := [EntranceStairs_Origin[0] - L_EntranceStairs; EntranceStairs_Origin[1]; Z_Entrance]
W_EntranceStair := W_Stair(H_EntranceStairs)
W_BasementStair := W_StairFixed(L_BasementStairs)  # Width of a single stair in the staircase
H_EntranceStair := H_Stair(H_EntranceStairs)
# Height of a single stair in the staircase
H_BasementStair := H_StairFixed(L_BasementStairs, H_BasementStairs)
# Stairs
EntranceStairs := StairsF(EntranceStairs_Origin, W_EntranceStairs + T_PlantWall, H_EntranceStairs, 180 deg)
BasementStairs := StairsFixedF(BasementStairs_Origin, W_BasementStairs + T_PlantWall, H_BasementStairs, L_BasementStairs, 0 deg)
# added 'mirrorLast' before everything
LowerStairScript := stack(SelectOpWalkway, EntranceStairs, mirrorLast, BasementStairs, mirrorLast, OpWalkwayFrz)
# Stairwell walls
StairwellSouthWall := BoxF(EntranceStairs_Origin + [-T_FiBoxWall; 0 m; 0 m], [BasementStairs_Origin[0]; EntranceStairs_Origin[1] - T_PlantWall; Z_BasementFloor - T_PlantFloor], [0; 0; 0]*deg)
StairwellNorthWall := WedgeF([BasementStairs_Origin[0]; EntranceStairs_Origin[1] + W_EntranceStairs; EntranceStairs_Origin[2]], [
    BasementStairs_Origin[0] + H_EntranceStairs + T_PlantFloor;
    EntranceStairs_Origin[1] + W_EntranceStairs + T_PlantWall;
    EntranceStairs_Origin[2] + L_EntranceStairs + W_EntranceStair + T_PlantFloor
], [0; 90; 0]*deg)
StairwellSouthWallCut := WedgeF([
    BasementStairs_Origin[0] - W_BasementStair;
    EntranceStairs_Origin[1];
    Z_BasementFloor - T_PlantFloor
], [
    BasementStairs_Origin[0] + L_BasementStairs;
    EntranceStairs_Origin[1] - T_PlantWall;
    Z_Entrance - T_PlantFloor
], [0; 0; 0]*deg)
# added 'mirrorLast' before everything
StairwellWallScript :=
    stack(SelectOpWalkway, StairwellSouthWall, mirrorLast, StairwellNorthWall, mirrorLast, OpWalkwayFrz, SelectOpWalkwaySub, StairwellSouthWallCut, mirrorLast, GroupDelete, SubtractFromOpWalkway, OpWalkwaySubFrz) if EN_Stairwell == 1
    view("t") otherwise
# Lower floors
OpEntranceLanding := BoxF([
    Fi_origin[0] - L_Fi - (T_FiWall - T_PlantWall);
    Fi_origin[1] + N_Fi*(W_Fi + T_FiWall);
    Z_Entrance - T_PlantFloor
], [
    Fi_origin[0] - L_Fi - (T_FiWall - T_PlantWall) + L_EntranceLanding;
    Fi_origin[1] + N_Fi*(W_Fi + T_FiWall) + W_BasementStairs + T_PlantWall + W_EntranceStairs + T_PlantWall;
    Z_Entrance
], [0; 0; 0]*deg)
BasementFloor := BoxF([Fi_origin[0] + T_FiWall; Fi_origin[1] - T_FiWall + T_PlantWall; Z_BasementFloor - T_PlantFloor], [
    FiInletChannel_Origin[0] + T_FiBoxWall - T_DrainChannelWall;
    Fi_origin[1] + N_Fi*(W_Fi + T_FiWall);
    Z_BasementFloor
], [0; 0; 0]*deg)
BasementLanding := BoxF([
    FiInletChannel_Origin[0] + T_FiBoxWall - T_DrainChannelWall;
    Fi_origin[1] + N_Fi*(W_Fi + T_FiWall);
    Z_BasementFloor - T_PlantFloor
], [
    FiInletChannel_Origin[0] + T_FiBoxWall - T_DrainChannelWall - L_BasementLanding;
    Fi_origin[1] + N_Fi*(W_Fi + T_FiWall) + W_BasementStairs;
    Z_BasementFloor
], [0; 0; 0]*deg)
# added 'mirrorLast' before everything
LowerFloorScript := stack(SelectOpWalkway, OpEntranceLanding, mirrorLast, BasementFloor, mirrorLast, BasementLanding, mirrorLast, Union_All, OpWalkwayFrz)
# Floor cut
LowerAccessFloorCut := BoxF([
    Fi_origin[0] - L_Fi - (T_FiWall - T_PlantWall);
    Fi_origin[1] + N_Fi*(W_Fi + T_FiWall) + W_BasementStairs + T_PlantWall;
    Z_Walkway - T_PlantFloor - zc
], [
    FiInletChannel_Origin[0] + T_FiBoxWall;
    Fi_origin[1] + N_Fi*(W_Fi + T_FiWall) + W_BasementStairs + T_PlantWall + W_EntranceStairs;
    Z_Walkway + zc
], [0; 0; 0]*deg)
# added 'mirrorLast' where needed
OpLowerAccessScript :=
    stack(SelectOpWalkwaySub, LowerAccessFloorCut, mirrorLast, GroupDelete, SubtractFromOpWalkway, OpWalkwaySubFrz, LowerStairScript, LowerFloorScript) if EN_Stairwell == 1
    view("t") otherwise
# Sed tank floor cuts
SedSubBox_Origin := [Plant_Origin[0] + T_SedWall; Plant_Origin[1] - T_SedWall; Z_Walkway - T_PlantFloor - zc]
SedSubBox_Dim := [
    -L_Sed - 2*T_SedWall;
    N_SedTanks*W_Sed + (N_SedTanks - 1)*T_SedDividingWall + 2*T_SedWall;
    T_PlantFloor + 2*zc
]
SedDrainBox_Origin := [
    SedSludgeDrainValve_Origin[0] - ValveLength(ND_SedJetReverser);
    SedSludgeDrainValve_Origin[1] + ValveLength(ND_SedJetReverser)/2;
    Z_Walkway - T_PlantFloor - zc
]
SedDrainBox_Dim := [
    SedHopperDrainValve_Origin[0] - SedSludgeDrainValve_Origin[0] + ValveLength(ND_SedJetReverser) + ValveSocket(ND_SedHopperDrain);
    SedHopperDrainValve_Origin[1] - SedSludgeDrainValve_Origin[1] - ValveLength(ND_SedJetReverser)/2 - ValveLength(ND_SedHopperDrain)/2;
    T_PlantFloor + 2*zc
]
SedSubBox := BoxF(SedSubBox_Origin, SedSubBox_Origin + SedSubBox_Dim, [0; 0; 0]*deg)
SedDrainSubBox := BoxF(SedDrainBox_Origin, SedDrainBox_Origin + SedDrainBox_Dim, [0; 0; 0]*deg)
ArraySedDrainBox := ArrayLast(N_SedTanks, 1, W_Sed + T_SedDividingWall)
MirrorSedBox := Mirror3dLast("yz", [Floc_Origin[0] - L_Floc - W_PlantDC/2 - T_PlantWall; 0 m], "n")
SedFloorCutScript := stack(SedSubBox, SedDrainSubBox, ArraySedDrainBox)
# Flocculator floor cuts
FlocSubBox_Origin := [Floc_Origin[0] + T_FlocWall; Floc_Origin[1] - T_FlocWall; Z_Walkway - T_PlantFloor - zc]
FlocSubBox_Dim := [
    -2*T_FlocWall - L_Floc;
    N_FlocChannels*W_FlocChannel + (N_FlocChannels - 1)*T_FlocDividingWall + 2*T_FlocWall;
    T_PlantFloor + 2*zc
]
FlocSubBox := BoxF(FlocSubBox_Origin, FlocSubBox_Origin + FlocSubBox_Dim, [0; 0; 0]*deg)
MirrorFlocBox := Mirror3dAll("yz", [Floc_Origin[0] - L_Floc - W_PlantDC/2 - T_PlantWall; 0 m], "n")
FlocFloorCutScript := stack(FlocSubBox)
# Dose controller floor cuts
DosingSubBox1_Dim := [OD_Fitting(ND_CoagPipe); OD_Fitting(ND_CoagPipe); T_PlantFloor + 2*zc]
DosingSubBox1_Origin := [
    Et_Origin[0] - L_Et - T_PlantWall - OD_Fitting(ND_CoagPipe);
    Coag1DrainElbow1_Origin[1] + S_Fitting - OR_Fitting(ND_CoagPipe);
    Z_Walkway - T_PlantFloor - zc
]
DosingSubBox1 := BoxF(DosingSubBox1_Origin, DosingSubBox1_Origin + DosingSubBox1_Dim, [0; 0; 0]*deg)
DosingSubBox2_Dim := [OD_Fitting(ND_CoagPipe); OD_Fitting(ND_CoagPipe); T_PlantFloor + 2*zc]
DosingSubBox2_Origin := [
    Et_Origin[0] - L_Et - T_PlantWall - OD_Fitting(ND_CoagPipe);
    Chlor2DrainElbow1_Origin[1] - S_Fitting - OR_Fitting(ND_CoagPipe);
    Z_Walkway - T_PlantFloor - zc
]
DosingSubBox2 := BoxF(DosingSubBox2_Origin, DosingSubBox2_Origin + DosingSubBox2_Dim, [0; 0; 0]*deg)
ChemDrainSubBox := BoxF([
    ChemPlatformFloor_Origin[0] + T_PlantWall;
    Chlor2DrainElbow1_Origin[1] - S_Fitting - OR_Fitting(ND_CoagPipe) - S_Fitting;
    Z_Walkway - T_PlantFloor
], [
    ChemPlatformFloor_Origin[0] + T_PlantWall + OD_Fitting(ND_CoagPipe) + zc;
    Coag1DrainElbow1_Origin[1] + S_Fitting + OR_Fitting(ND_CoagPipe) + S_Fitting;
    Z_Walkway
], [0; 0; 0]*deg)
CdcFloorCutScript := stack(DosingSubBox1, DosingSubBox2, ChemDrainSubBox)
# Filter floor cuts
FilterSubBox_Origin := [Fi_origin[0] + T_FiWall; Fi_origin[1] - T_FiWall; Z_Walkway - T_PlantFloor - zc]
FilterSubBox_Dim := [-2*T_FiWall - L_Fi; T_FiWall + N_Fi*(W_Fi + T_FiWall); T_PlantFloor + 2*zc]
FilterSubBox := BoxF(FilterSubBox_Origin, FilterSubBox_Origin + FilterSubBox_Dim, [0; 0; 0]*deg)
FiSiphonSubBox_Origin := [
    Fi_origin[0] + T_FiWall + OR(3 in);
    Fi_origin[1] + S_Fitting + OR_Fitting(ND_FiSiphon);
    Z_Walkway - T_PlantFloor - zc
]
FiSiphonSubBox := CylinderF(FiSiphonSubBox_Origin, OR(3 in), T_PlantFloor + 2*zc, [0; 90]*deg)
ArrayFiSiphonSubBox := ArrayLast(N_Fi, 1, W_Fi + T_FiWall)
FiAuxSubBox_Origin := [
    FiInletChannel_Origin[0] + T_FiBoxWall;
    FiInletChannel_Origin[1] - T_FiBoxWall;
    Z_Walkway - T_PlantFloor - zc
]
FiAuxSubBox_Dim := [
    -W_FiInletChannel - L_FiOverflow - L_FiExit - 4*T_FiBoxWall;
    L_FiInletChannel + 2*T_FiBoxWall;
    T_PlantFloor + 2*zc
]
FiAuxSubBox := BoxF(FiAuxSubBox_Origin, FiAuxSubBox_Origin + FiAuxSubBox_Dim, [0; 0; 0]*deg)
MirrorFilterBox := Mirror3dLast("yz", [Floc_Origin[0] - L_Floc - W_PlantDC/2 - T_PlantWall; 0 m], "n")
# added 'mirrorLast' before everything
FiFloorCutScript := stack(SelectOpWalkwaySub, FilterSubBox, mirrorLast, FiSiphonSubBox, mirrorLast, ArrayFiSiphonSubBox, FiAuxSubBox, mirrorLast, GroupDelete, SubtractFromOpWalkway, OpWalkwaySubFrz)
FiAuxPeninsula_Origin := [
    FiOverflowBox_Origin[0];
    FiEntranceBox_origin[1] + 2*W_FiEntrance + W_FiOverflow + 3*T_FiBoxWall;
    Z_Walkway - T_PlantFloor
]
FiAuxPeninsula_Dim := [-L_FiOverflow - L_FiExit - 2*T_FiBoxWall; W_FiOverflow; T_PlantFloor]
FiAuxPeninsula := BoxF(FiAuxPeninsula_Origin, FiAuxPeninsula_Origin + FiAuxPeninsula_Dim, [0; 0; 0]*deg)
ArrayFiAuxPeninsula := ArrayLast(max(N_FiPeninsulas, 1), 1, 2*W_FiEntrance + W_FiOverflow + 4*T_FiBoxWall)
# added 'mirrorLast' before everything
FiAuxPeninsulaScript := stack(SelectOpWalkway, FiAuxPeninsula, mirrorLast, ArrayFiAuxPeninsula, Union_All, OpWalkwayFrz)
FiFloorScript :=
    stack(FiFloorCutScript, FiAuxPeninsulaScript) if N_FiPeninsulas > 0
    FiFloorCutScript otherwise
# Chem platform floor cuts
ChemPlatformSubBox_Origin := [ChemPlatformFloor_Origin[0]; ChemPlatformFloor_Origin[1]; Z_Walkway - T_PlantFloor - zc]
ChemPlatformSubBox_Dim := [-W_ChemPlatform - zc; -L_ChemPlatform - T_PlantWall; T_PlantFloor + 2*zc]
ChemPlatformSubBox := BoxF(ChemPlatformSubBox_Origin, ChemPlatformSubBox_Origin + ChemPlatformSubBox_Dim, [0; 0; 0]*deg)
# Operator Access Ramp
# Draw one then mirror it
FitoSedRampLayer := layer_new("OpRamp", purple)  # first, draw the blocks
SelectFitoSedRamp := SelectLayer("OpRamp")
FitoSedRampFrz := FreezeLayer("OpRamp")
SubtractFromRamp := SubtractF(["OpRamp"], "DeleteMe")
FitoSedRampSubLayer := layer_new("OpRampSub", yellow)  # subtract the wedges and stuff from the blocks
SelectFitoSedRampSub := SelectLayer("OpRampSub")
FitoSedRampSubFrz := FreezeLayer("OpRampSub")
degreeOfRamp := 15*deg  # Notes on Elevations
Z_FiInletTop := FiInletChannel_Origin[2] + H_FiInletChannel
Z_Walkway =  # error: This variable is undefined.
Z_FiSedChannelTop := SedToFiChannel_Origin[2] + H_SedInletChannel - H_PlantFreeboard
Z_RampTop := Z_FiSedChannelTop + T_PlantWall
H_RampWall := 10 cm = 0.1 m
Z_RampWallTop := Z_RampTop + H_RampWall
RampTopBox_Origin := Plant_Origin + [-L_Sed; 0 m; Z_FiSedChannelTop - Plant_Origin[2]]
RampTopBox_Dim := [
    -W_PlantDC - 2*T_PlantWall;
    -W_SedExitChannelPostWeir - 2*T_PlantWall;
    Z_RampWallTop - RampTopBox_Origin[2]
]
RampTopBox_End := RampTopBox_Origin + RampTopBox_Dim
RampTopBox := BoxF(RampTopBox_Origin, RampTopBox_End, [0; 0; 0]*deg)
RampSideBox_Origin := [RampTopBox_Origin[0]; RampTopBox_Origin[1]; Z_RampWallTop]
RampSideBox_Dim := [
    RampTopBox_Dim[0];
    (-(Z_Walkway - Z_RampWallTop - T_PlantWall))/tan(degreeOfRamp);
    Z_Walkway - Z_RampWallTop - T_PlantWall
]
RampSideBox_End := RampSideBox_Origin + RampSideBox_Dim
RampSideBox := BoxF(RampSideBox_Origin, RampSideBox_End, [0; 0; 0]*deg)
RampSideBox_End =  # error
mirpt_Ramp := RampSideBox_Origin - [RampSideBox_Dim[0]; (-RampTopBox_Dim)[1]/2; Z_RampWallTop]
mirrorRampSideBox := Mirror3dLast("zx", mirpt_Ramp, "n")
mirrorRampAll := Mirror3dAll("yz", mirrorpt, "n")
Ramp1Script := stack(FitoSedRampLayer, RampSideBox, RampTopBox, FitoSedRampFrz, SelectFitoSedRamp, mirrorRampAll, FitoSedRampFrz)
# I will probably need to union this at the end... and subtract it from the surrounding concrete...
# Draw the wedges to be subtracted from the ramp
TopBox1_Origin := RampTopBox_Origin + [-T_PlantWall; RampSideBox_Dim[1] + S_Fitting; T_PlantWall]
TopBox1_End := RampTopBox_End + [T_PlantWall; (-RampSideBox_Dim)[1] - S_Fitting; S_Fitting]
TopBox1 := BoxF(TopBox1_Origin, TopBox1_End, [0; 0; 0]*deg)
WedgeSpin1_Origin := RampSideBox_Origin + [-T_PlantWall; 0 m; 0 m]
Wedge1_Origin := WedgeSpin1_Origin + [0 m; RampSideBox_Dim[1]; -H_RampWall]
Wedge1_End := Wedge1_Origin + [-RampSideBox_Dim[1]; (-RampSideBox_Dim[0] - 2*T_PlantWall); -RampSideBox_End[2] + H_RampWall]
Wedge1 := WedgeF(Wedge1_Origin, Wedge1_End, [90; 0; 0]*deg)
Wedge2_Origin := Wedge1_Origin + [T_PlantWall; 0 m; H_RampWall]
Wedge2_End := Wedge1_End + [T_PlantWall; 2*T_PlantWall; H_RampWall]
Wedge2 := WedgeF(Wedge2_Origin, Wedge2_End, [90; 0; 0]*deg)
Ramp2Script := stack(FitoSedRampSubLayer, Wedge1, TopBox1, Wedge2, mirrorRampAll, GroupDelete, SubtractFromRamp, TopBox1, mirrorRampAll, GroupDelete, SubtractFromSedTank, FitoSedRampSubFrz)
# Delete the boxes for the sed tank floc hopper valves
SedDrainSubBox_2 := BoxF(SedDrainBox_Origin, SedDrainBox_Origin + SedDrainBox_Dim + [0 m; 0 m; 5 m], [0; 0; 0]*deg)
ArraySedDrainBox_2 := ArrayLast(N_SedTanks, 1, W_Sed + T_SedDividingWall)
RampScript := stack(Ramp1Script, Ramp2Script, SelectFitoSedRampSub, SedDrainSubBox_2, ArraySedDrainBox_2, mirrorRampAll, GroupDelete, SubtractFromRamp, FitoSedRampSubFrz)
mirrorOp :=
    if N_Train > 1
        mir ← Mirror3dAll("yz", mirrorpt, "n")
        thwOp ← ThawMultiple(["Op*"])
        frzOp ← FreezeMultiple(["Op*"])
        mir ← stack(thwOp, mir, Union_All, frzOp)
    mir ← "" otherwise
    return mir
AC_OperatorAccess := stack(PlantFloorScript, OpWalkwaySubLayer, SedFloorCutScript, FlocFloorCutScript, ChemPlatformSubBox, CdcFloorCutScript, GroupDelete, SubtractFromOpWalkway, OpWalkwaySubFrz, mirrorOp, FiFloorScript, StairwellWallScript, OpLowerAccessScript, RampScript)
