# Operator Access
# Chemical Platform
# Width and length of the chemical platform are defined in ChemStockTanksAC
ChemPlatform_Origin := [
    CoagTank_Origin[0] + R_CoagTank + T_ChemTankWall + S_ChemTankBorder - L_EtChemPlatform;
    Et_Origin[1] + W_Et + T_PlantWall - W_EtChemPlatform;
    CoagTank_Origin[2] - T_ChemTankWall - T_PlantWall
]
ChemPlatform_Dimensions := [L_EtChemPlatform; W_EtChemPlatform; T_PlantWall]
CoagPlatformOld_Dimensions := [
    L_EtChemPlatform;
    W_EtChemPlatform;
    CoagTank_Origin[2] - T_ChemTankWall - H_Sed + H_WalkwayToTankWall
]
ChemPlatformWall_Origin := [
    ChemPlatform_Origin[0] + L_EtChemPlatform - T_PlantWall;
    ChemPlatform_Origin[1];
    Plant_Origin[2] + H_Sed - H_WalkwayToTankWall
]
ChemPlatformWall_Dimensions := [
    T_PlantWall;
    W_EtChemPlatform;
    CoagTank_Origin[2] - T_ChemTankWall - H_Sed + H_WalkwayToTankWall - T_PlantWall
]
H_ChemStairs := CoagTank_Origin[2] - T_ChemTankWall - H_Sed + H_WalkwayToTankWall
W_ChemStairs := W_EtChemPlatform
ChemStairs_Origin := ChemPlatform_Origin + [0 m; 0 m; ChemPlatform_Dimensions[2]]
OpAccessLayer := layer_new("OpWalkwayCon", grey)
PlatformStairs := Stairs(ChemStairs_Origin, W_ChemStairs, H_ChemStairs, 180 deg)
PlatformBox := BoxF(ChemPlatform_Origin, ChemPlatform_Origin + ChemPlatform_Dimensions, [0; 0; 0]*deg)
PlatformWall := BoxF(ChemPlatformWall_Origin, ChemPlatformWall_Origin + ChemPlatformWall_Dimensions, [0; 0; 0]*deg)
PlatformSpillGuard := BoxF(ChemPlatform_Origin + ChemPlatform_Dimensions, ChemPlatform_Origin + ChemPlatform_Dimensions + [-T_ConcreteMin; -ChemPlatform_Dimensions[1]; T_ConcreteMin], [0; 0; 0]*deg)
# unnecessary now
FreezeEtWalkway := FreezeLayer("OpWalkwayCon")
W_PlatformHole := 2*outerdiameter(ND_CoagPiping)  # these are currently fairly arbitrarily defined to be able to fit all six pipes plus wiggle room
L_PlatformHole := 8*outerdiameter(ND_CoagPiping)
# subtract the holes in the platform wall and in the floor
R_Hole := outerdiameter(AvailND[index2(ND_CoagPiping, AvailND) + 1])/2
L_MaleInsertToHoleCenter := ElbowRadius(ND_CoagPiping) + L_BallValve + L_FirstPipe + L_SecondPipe  # this will likely be redefined
# place this at the bottom of the platform wall near the front
SubtractDrainWallBox := BoxF(ChemPlatformWall_Origin + [0 m; L_PlatformHole; 0 m], ChemPlatformWall_Origin + [T_PlantWall; 2*L_PlatformHole; W_PlatformHole], [0; 0; 0]*deg)
SubtractDoseWallBox := BoxF([
    ChemPlatformWall_Origin[0];
    ChemPlatformWall_Origin[1] + L_PlatformHole;
    ChemPlatform_Origin[2] - W_PlatformHole
], [
    ChemPlatformWall_Origin[0] + T_PlantWall;
    ChemPlatformWall_Origin[1] + 1.5*L_PlatformHole;
    ChemPlatform_Origin[2]
], [0; 0; 0]*deg)  # place this near the constant head tanks
SubtractCoagDrainPipe := CylinderF(CoagTank_Origin, R_Hole, T_PlantWall, [0; 270]*deg)  # reorient these correctly (change the angle vector)
SubtractCoagDosePipe := CylinderF(CoagTank_Origin + [
    -sqrt(2)/2*(R_CoagTank + T_ChemTankWall + L_BulkheadFittingEnd + L_MaleInsertEnd + L_MaleInsertToHoleCenter);
    -sqrt(2)/2*(R_CoagTank + T_ChemTankWall + L_BulkheadFittingEnd + L_MaleInsertEnd + L_MaleInsertToHoleCenter);
    0 m
], R_Hole, T_PlantWall, [0; 270]*deg)
SubtractCoag2DrainPipe := CylinderF(CoagTank_Origin - [0 m; 2*R_CoagTank + 2*T_ChemTankWall + S_ChemTankBorder; 0 m], R_Hole, T_PlantWall, [0; 270]*deg)
SubtractCoag2DosePipe := CylinderF(CoagTank_Origin - [0 m; 2*R_CoagTank + 2*T_ChemTankWall + S_ChemTankBorder; 0 m] + [
    -sqrt(2)/2*(R_CoagTank + T_ChemTankWall + L_BulkheadFittingEnd + L_MaleInsertEnd + L_MaleInsertToHoleCenter);
    sqrt(2)/2*(R_CoagTank + T_ChemTankWall + L_BulkheadFittingEnd + L_MaleInsertEnd + L_MaleInsertToHoleCenter);
    0 m
], R_Hole, T_PlantWall, [0; 270]*deg)
SubtractChlorDrainPipe := CylinderF(ChlorineTank_Origin, R_Hole, T_PlantWall, [0; 270]*deg)
SubtractChlorDosePipe := CylinderF(ChlorineTank_Origin + [
    0 m;
    -(R_ChlorineTank + T_ChemTankWall + L_BulkheadFittingEnd + L_MaleInsertEnd + L_MaleInsertToHoleCenter);
    0 m
], R_Hole, T_PlantWall, [0; 270]*deg)
SubtractChlor2DrainPipe := CylinderF(ChlorineTank_Origin - [2*R_ChlorineTank + 2*T_ChemTankWall + S_ChemTankBorder; 0 m; 0 m], R_Hole, T_PlantWall, [0; 270]*deg)
SubtractChlor2DosePipe := CylinderF(ChlorineTank_Origin + [
    -(2*R_ChlorineTank + 2*T_ChemTankWall + S_ChemTankBorder);
    -(R_ChlorineTank + T_ChemTankWall + L_BulkheadFittingEnd + L_MaleInsertEnd + L_MaleInsertToHoleCenter);
    0 m
], R_Hole, T_PlantWall, [0; 270]*deg)
SubtractFilterCoagDrainPipe := CylinderF(FilterCoagTank_Origin, R_Hole, T_PlantWall, [0; 270]*deg)
SubtractFilterCoagDosePipe := CylinderF(FilterCoagTank_Origin + [
    0 m;
    R_ChlorineTank + T_ChemTankWall + L_BulkheadFittingEnd + L_MaleInsertEnd + L_MaleInsertToHoleCenter;
    0 m
], R_Hole, T_PlantWall, [0; 270]*deg)
SubtractFilterCoag2DrainPipe := CylinderF(FilterCoagTank_Origin - [2*R_FilterCoagTank + 2*T_ChemTankWall + S_ChemTankBorder; 0 m; 0 m], R_Hole, T_PlantWall, [0; 270]*deg)
SubtractFilterCoag2DosePipe := CylinderF(FilterCoagTank_Origin + [
    -(2*R_FilterCoagTank + 2*T_ChemTankWall + S_ChemTankBorder);
    R_ChlorineTank + T_ChemTankWall + L_BulkheadFittingEnd + L_MaleInsertEnd + L_MaleInsertToHoleCenter;
    0 m
], R_Hole, T_PlantWall, [0; 270]*deg)
GroupPlatformSubtractions := GroupAll("DeleteMe")
SubtractPlatformHoles := SubtractF(["OpWalkwayCon"], "DeleteMe")
SubtractionScript := stack(FreezeEtWalkway, SubtractDrainWallBox, SubtractDoseWallBox, SubtractCoagDrainPipe, SubtractCoagDosePipe, SubtractCoag2DrainPipe, SubtractCoag2DosePipe, SubtractChlorDrainPipe, SubtractChlorDosePipe, SubtractChlor2DrainPipe, SubtractChlor2DosePipe, SubtractFilterCoagDrainPipe, SubtractFilterCoagDosePipe, SubtractFilterCoag2DrainPipe, SubtractFilterCoag2DosePipe, GroupPlatformSubtractions, SubtractPlatformHoles)
# If the number of flocculator channels is even,
# the platform will be mirrored.
# this should never happen now
Mirror := Mirror3dAll("YZ", [Plant_Origin[0] - 1/2*L_Sed; 0 m; 0 m], "Y")
UnionPlatform1 := Union_All
ChemPlatform_Script := stack(OpAccessLayer, PlatformStairs, PlatformBox, PlatformWall, SubtractionScript, UnionPlatform1)
# [component: inputs ChemPlatform_Script]
# Drain Channel Walkway Floor
# Draws the floor over the main plant drain channel, to the left of the tanks.
DCWalkway_Origin := [
    Plant_Origin[0] + T_PlantWall;
    Plant_Origin[1];
    Plant_Origin[2] + H_Sed - H_WalkwayToTankWall - T_Floor
]
DCWalkway_Dimensions := [
    W_DCWalkway;
    N_SedTanks*(W_Sed + T_PlantWall) + N_FlocChannels*(W_FlocChannel + T_PlantWall) + W_EtWalkway + W_EtOverflowChannel + T_EtWeir + T_PlantWall + W_Et;
    T_Floor
]
SedDrainBoxes_Dimensions := [
    -(L_SedSludgeValvePipe - 2*SocketDepth(ND_SedSludgePipe) + 2*MaleAdapterLength(ND_SedSludgePipe) + ValveLength(ND_SedSludgePipe) - ValveSocket(ND_SedSludgePipe));
    2*ND_SedSludgePipe;
    T_Floor
]
FlocDrainBoxes_Dimensions := [
    -(2*MaleAdapterLength(ND_FlocValve) + ValveLength(ND_FlocValve) - ValveSocket(ND_FlocValve));
    2*ND_FlocValve;
    T_Floor
]
EtDrainBox_Dimensions := [
    2*MaleAdapterLength(ND_EtFlowControl) + ValveLength(ND_EtFlowControl) - ValveSocket(ND_EtFlowControl);
    2*ND_EtFlowControl;
    T_Floor
]
DCWalkwayBox := BoxF(DCWalkway_Origin, DCWalkway_Origin + DCWalkway_Dimensions, [0; 0; 0]*deg)
DCWalkway_Script := DCWalkwayBox
# Coagulant Platform Floor
# Draws the floor beneath the coagulant stock platform and to the left of it, at the base of the stairs.
CoagFloor_Origin := [
    CoagPlatform_Origin[0] - 4 m;
    CoagPlatform_Origin[1];
    Plant_Origin[2] + H_Sed - H_WalkwayToTankWall - T_Floor
]
# Calculate the length of the stairs for the x coordinate. Also needs to be incorporated into other floor origin points below. Ultimately these layout dimensions should be better organized in the design tool so that they can be easily optimized.
CoagFloor_Dimensions := [4 m + CoagPlatform_Dimensions[0]; CoagPlatform_Dimensions[1]; T_Floor]
FloorBox := BoxF(CoagFloor_Origin, CoagFloor_Origin + CoagFloor_Dimensions, [0; 0; 0]*deg)
FreezeEtWalkway := FreezeLayer("OpWalkwayCon")
FloorSubtractBox := BoxF(ChemPlatform_Origin + ([
    L_EtChemPlatform;
    W_EtChemPlatform + L_PlatformHole;
    Plant_Origin[2] + H_Sed - H_WalkwayToTankWall - T_Floor
], ChemPlatform_Origin + [
    L_EtChemPlatform + W_PlatformHole;
    W_EtChemPlatform + 2*L_PlatformHole;
    Plant_Origin[2] + H_Sed - H_WalkwayToTankWall
]), [0; 0; 0]*deg)
GroupPlatformSubtractions := GroupAll("DeleteMe")
SubtractPlatformHole := SubtractF(["OpWalkwayCon"], "DeleteMe")
ChemFloor_Script := stack(FloorBox, FreezeEtWalkway, FloorSubtractBox, GroupPlatformSubtractions, SubtractPlatformHoles)
# Entrance Tank Walkway Floor
# The floor between the entrance tank and the flocculator, but extending all the way to the left-most wall of the plant.
EtWalkway_Origin := [
    Plant_Origin[0] + T_PlantWall;
    Et_Origin[1] - T_PlantWall;
    Plant_Origin[2] + H_Sed - H_WalkwayToTankWall - T_Floor
]
EtWalkway_Dimensions := [
    -L_Et - 2*T_PlantWall - CoagPlatform_Dimensions[0] - 4 m;
    -Et_Origin[1] + W_SedBay*N_SedBays*N_SedTanks + W_FlocChannel*N_FlocChannels + (N_SedTanks + N_FlocChannels + 1)*T_PlantWall;
    T_Floor
]
EtWalkwayBox := BoxF(EtWalkway_Origin, EtWalkway_Origin + EtWalkway_Dimensions, [0; 0; 0]*deg)
FreezeEtWalkway := FreezeLayer("OpWalkwayCon")
# space for the RM Pipe going through the walkway
RMCutout_Origin := [
    RMTee_Origin[0] - innerdiameter(ND_RMPipe, PS_Default);
    Et_Origin[1] - T_PlantWall;
    EtWalkway_Origin[2]
]
RMCutout_Dimensions := [2*innerdiameter(ND_RMPipe, PS_Default); -3*innerdiameter(ND_RMPipe, PS_Default); T_Floor]
RMCutoutBox := BoxF(RMCutout_Origin, RMCutout_Origin + RMCutout_Dimensions, [0; 0; 0]*deg)
SubtractRMCutout := SubtractF(["OpWalkwayCon"], "DeleteMe")
EtWalkway_Script := stack(EtWalkwayBox, FreezeEtWalkway, RMCutoutBox, GroupAll("DeleteMe"), SubtractRMCutout)
# Flocculator Floor
# The floor area to the left of the flocculator.
FlocFloor_Origin := [
    CoagFloor_Origin[0];
    CoagFloor_Origin[1] + EtWalkway_Dimensions[1];
    Plant_Origin[0] + H_Sed - H_WalkwayToTankWall - T_Floor
]
FlocFloor_Dimensions := [
    Floc_Origin[0] - Wall_Dim[0] - CoagFloor_Origin[0] + T_PlantWall;
    -TotalFloc_Dim[1] - Wall_Dim[1] - T_PlantWall;
    T_Floor
]
SelectOpFloor := SelectLayer("OpWalkwayCon")
FlocFloor := BoxF(FlocFloor_Origin, FlocFloor_Origin + FlocFloor_Dimensions, [0; 0; 0]*deg)
FreezeOpFloor := FreezeLayer("OpWalkwayCon")
FlocFloor_Script := stack(SelectOpFloor, FlocFloor, FreezeOpFloor)
# Sedimentation Tank Floor
SedFloor_Origin := [
    Plant_Origin[0] - L_Sed - T_PlantWall;
    Plant_Origin[1];
    Plant_Origin[2] + H_Sed - H_WalkwayToTankWall - T_Floor
]
SedFloor_Dimensions := [
    CoagFloor_Origin[0] + L_Sed + T_PlantWall;
    N_SedTanks*W_Sed + (N_SedTanks - 1)*T_PlantWall;
    T_Floor
]
# SelectOpFloor
SedFloor := BoxF(SedFloor_Origin, SedFloor_Origin + SedFloor_Dimensions, [0; 0; 0]*deg)
# FreezeOpFloor
DrainBoxes :=
    Total ← BoxF([
        Plant_Origin[0] - L_Sed - T_PlantWall;
        W_SedBay*N_SedBays - 0.5*W_SedBay - ND_SedSludgePipe;
        DCWalkway_Origin[2]
    ], [
        Plant_Origin[0] - L_Sed - T_PlantWall;
        W_SedBay*N_SedBays - 0.5*W_SedBay - ND_SedSludgePipe;
        DCWalkway_Origin[2]
    ] + SedDrainBoxes_Dimensions, [0; 0; 0]*deg)
    if N_SedBays > 1
        for i ∈ 1 .. N_SedBays - 1
            Total ← stack(Total, BoxF([
                Plant_Origin[0] - L_Sed - T_PlantWall;
                W_SedBay*(N_SedBays - i) - 0.5*W_SedBay - ND_SedSludgePipe;
                DCWalkway_Origin[2]
            ], [
                Plant_Origin[0] - L_Sed - T_PlantWall;
                W_SedBay*(N_SedBays - i) - 0.5*W_SedBay - ND_SedSludgePipe;
                DCWalkway_Origin[2]
            ] + SedDrainBoxes_Dimensions, [0; 0; 0]*deg))
    Total ← stack(Total, array_all(N_SedTanks, 1, W_SedBay*N_SedBays + T_PlantWall)) if N_SedTanks > 1
    for j ∈ 0 .. last(Y_FlocDrainValves)
        Total ← stack(Total, BoxF([Plant_Origin[0] - L_Sed - T_PlantWall; Y_FlocDrainValves[j] - ND_FlocValve; DCWalkway_Origin[2]], [Plant_Origin[0] - L_Sed - T_PlantWall; Y_FlocDrainValves[j] - ND_FlocValve; DCWalkway_Origin[2]] + FlocDrainBoxes_Dimensions, [0; 0; 0]*deg))
    Total ← stack(Total, BoxF([
        Et_Origin[0] + T_PlantWall;
        Et_Origin[1] + S_Fitting + ConRadius(ND_EtDrain) - ND_EtFlowControl;
        DCWalkway_Origin[2]
    ], [
        Et_Origin[0] + T_PlantWall;
        Et_Origin[1] + S_Fitting + ConRadius(ND_EtDrain) - ND_EtFlowControl;
        DCWalkway_Origin[2]
    ] + EtDrainBox_Dimensions, [0; 0; 0]*deg))
    return Total
SubtractDrainBoxes := SubtractF(["OpWalkwayCon"], "DeleteMe")
SedFloor_Script := stack(SelectOpFloor, SedFloor, FreezeOpFloor, DrainBoxes, GroupDelete, SubtractDrainBoxes)
# Filter Floor
FiWalkway_Origin := [
    Plant_Origin[0] - L_Sed - W_DC - W_FiInletChannel - L_FiEntrance - L_FiExit - 5*T_PlantWall;
    max(Fi_origin[1] + W_Fi, FiExitBox_origin[1] + W_FiExit) + (Et_Origin[1] - W_Fi - T_PlantWall - W_EtWalkway - T_FiWall - Fi_origin[1]);
    FiExitBox_origin[2] - T_PlantWall
]
FiWalkway_Dim := [
    -(FiExitBox_origin[0] - Fi_origin[0] - L_FiExit - T_PlantWall - T_FiWall);
    -(max(Fi_origin[1] + W_Fi, FiExitBox_origin[1] + W_FiExit) - min(Fi_origin[1] - (T_FiWall + W_Fi)*(N_Fi - 1), Plant_Origin[1] - max((W_Fi + T_FiWall)*N_Fi, (2*W_FiEntrance + W_FiOverflow + 4*T_PlantWall)*ceil(N_Fi/2) - T_PlantWall + (W_Fi - W_FiOverflow/2 - T_PlantWall - W_FiEntrance + T_FiWall/2))));
    T_Floor
]
# SelectOpFloor
FiWalkway := BoxF(FiWalkway_Origin, FiWalkway_Origin + FiWalkway_Dim, [0; 0; 0]*deg)
# FreezeOpFloor
FiSiphonHole := BoxF([
    FiWalkway_Origin[0] + FiWalkway_Dim[0];
    Et_Origin[1] - W_Fi - T_PlantWall - W_EtWalkway - T_FiWall;
    FiExitBox_origin[2] - T_PlantWall - zc
], [
    FiWalkway_Origin[0] + 2*SocketDepth(ND_FiSiphon) + ShortTeeLength(ND_FiSiphon) + ConRadius(ND_FiSiphon) + 5 cm + FiWalkway_Dim[0];
    Et_Origin[1] - W_Fi - T_PlantWall - W_EtWalkway - T_FiWall + T_ConcreteMin + 2*ConRadius(ND_FiSiphon) + 5 cm;
    FiExitBox_origin[2] - T_PlantWall + T_Floor + zc
], [0; 0; 0]*deg)
ArraySiphonHole := ArrayLast(2, 1, -(2*(ConRadius(ND_FiSiphon) + S_Fitting) + T_FiWall))
ArraySiphonPair := array_all(2, 1, -max((W_Fi + T_FiWall)*2, 2*W_FiEntrance + W_FiOverflow + 3*T_PlantWall))
FiTankHole1 := BoxF([
    FiWalkway_Origin[0];
    FiWalkway_Origin[1];
    Plant_Origin[2] + H_Sed - H_WalkwayToTankWall - T_Floor - zc
], [
    FiWalkway_Origin[0];
    FiWalkway_Origin[1];
    Plant_Origin[2] + H_Sed - H_WalkwayToTankWall - T_Floor - zc
] + [FiWalkway_Dim[0]; FiWalkway_Dim[1]; T_Floor + 2*zc], [0; 0; 0]*deg)
FiTankHole2 := BoxF([
    Plant_Origin[0] - L_Sed - W_DC - 5*T_PlantWall - 2*T_FiWall - W_MpWalkway - L_FiExit - L_FiEntrance - W_FiInletChannel - L_Fi;
    Et_Origin[1] - W_Fi - T_PlantWall - W_EtWalkway + W_Fi;
    Plant_Origin[2] + H_Sed - H_WalkwayToTankWall - T_Floor - zc
], [
    Plant_Origin[0] - L_Sed - W_DC - 5*T_PlantWall - W_MpWalkway - L_FiExit - L_FiEntrance - W_FiInletChannel;
    Et_Origin[1] - W_Fi - T_PlantWall - W_EtWalkway - 2*T_FiWall - (W_Fi + T_FiWall)*(N_Fi - 1);
    Plant_Origin[2] + H_Sed - H_WalkwayToTankWall + zc
], [0; 0; 0]*deg)
FiTankHole3 := BoxF([
    Plant_Origin[0] - L_Sed - W_DC - T_PlantWall;
    -T_PlantWall + (Et_Origin[1] - W_Fi - T_PlantWall - W_EtWalkway - T_FiWall - Fi_origin[1]) + Plant_Origin[1] - max((W_Fi + T_FiWall)*N_Fi, (2*W_FiEntrance + W_FiOverflow + 4*T_PlantWall)*ceil(N_Fi/2) - T_PlantWall + (W_Fi - W_FiOverflow/2 - T_PlantWall - W_FiEntrance + T_FiWall/2));
    Plant_Origin[2] + H_Sed - H_WalkwayToTankWall - T_Floor - zc
], [
    FiWalkway_Origin[0];
    (Et_Origin[1] - W_Fi - T_PlantWall - W_EtWalkway - T_FiWall - Fi_origin[1]) + Plant_Origin[1] - max((W_Fi + T_FiWall)*N_Fi, (2*W_FiEntrance + W_FiOverflow + 4*T_PlantWall)*ceil(N_Fi/2) - T_PlantWall + (W_Fi - W_FiOverflow/2 - T_PlantWall - W_FiEntrance + T_FiWall/2)) + L_FiInletChannel + T_PlantWall;
    Plant_Origin[2] + H_Sed - H_WalkwayToTankWall + zc
], [0; 0; 0]*deg)
# GroupDelete
SubtractFiWalkwayPieces := SubtractF(["OpWalkwayCon"], "DeleteMe")
FiWalkway :=
    stack(SelectOpFloor, FiWalkway, FreezeOpFloor, FiSiphonHole, FiTankHole1, FiTankHole2, FiTankHole3, GroupDelete, SubtractFiWalkwayPieces) if N_Fi == 1
    stack(SelectOpFloor, FiWalkway, FreezeOpFloor, FiSiphonHole, ArraySiphonHole, FiTankHole1, FiTankHole2, FiTankHole3, GroupDelete, SubtractFiWalkwayPieces) if N_Fi == 2
    stack(SelectOpFloor, FiWalkway, FreezeOpFloor, FiSiphonHole, ArraySiphonHole, ArraySiphonPair, FiTankHole1, FiTankHole2, FiTankHole3, GroupDelete, SubtractFiWalkwayPieces) otherwise
AC_OperatorAccess := stack(ChemPlatform_Script, DCWalkway_Script, EtWalkway_Script, ChemFloor_Script, FlocFloor_Script, SedFloor_Script, FiWalkway, SelectOpFloor, Union_All, FreezeOpFloor)
