# Automated Design: AutoCAD: Pipe Frame
# [reference: MasterProgram.xmcd]
# [reference: SedTank - with pieces.xmcd]
pipeframe_origin := [0; H_SedBayDivider + framewall_dim[2]; 0] = [0; 1.15152; 0] m
pipeframe_radius := 0.025 m
B_pipelength := 1 m
numpipeswidth := 10
numpipeslength := 3
B_pipewidth := 1 m
Pipeframescript :=
    layer1 ← layer_new("Pipeframe", yellow)
    view1 ← viewfront1
    cylinder1 ← cylinderC(pipeframe_origin, pipeframe_radius, -W_Sed)
    view2 ← viewtop1
    array1 ← array_all(1, numpipeswidth, B_pipewidth)
    view3 ← viewrightside1
    cylinder2 ← cylinderC([
        pipeframe_origin[0] + pipeframe_radius;
        pipeframe_origin[1] + 2*pipeframe_radius;
        pipeframe_origin[2]
    ], pipeframe_radius, L_Sed)
    array2 ← arrayB([pipeframe_origin[0]; pipeframe_origin[1] + 2*pipeframe_radius; pipeframe_origin[2]], 1, numpipeslength, B_pipelength)
    union1 ← union_allA
    layer2 ← layer_set("0")
    layerfreeze1 ← layer_freeze("Pipeframe")
    one ← stack(layer1, view1, cylinder1, view2, array1, view3, cylinder2, array2, union1, layer2, layerfreeze1)
    return one
# [component: inputs Pipeframescript]
