# Plant Layout
# make changes to the default plant layout here
# 1) thaw the entrance tank, flocculator, sed tanks, and drain channel to mirror them
ThawMirrorTanks := ThawMultiple(["Floc*"; "*DrainChannel*"])
MirrorPlantTanks := Mirror3dAll("yz", [Plant_Origin[0] - L_Sed/2; Plant_Origin[1]], "y")
FreezeMirrorTanks := FreezeMultiple(["Floc*"; "Sed*"; "*DrainChannel*"])
FlipTanks := stack(ThawMirrorTanks, MirrorPlantTanks, FreezeMirrorTanks)
# 2) move the filters to line up with the top of the flocculator
ThawFinishedFilter := ThawMultiple(["Fi*"])
Fi_OriginNew := [
    Plant_Origin[0] - L_Sed - W_DC - 5*T_PlantWall - T_FiWall - W_MpWalkway - L_FiExit - L_FiEntrance - W_FiInletChannel;
    Et_Origin[1] - W_Fi - T_PlantWall - W_EtWalkway - T_FiWall - (W_EtChemPlatform - W_Et - T_PlantWall);
    Fi_origin[2]
]
MoveFinishedFilter := MoveAll(Fi_origin, Fi_OriginNew)
FreezeAllFilter := FreezeMultiple(["Fi*"])
MoveFilterFinal := stack(ThawFinishedFilter, MoveFinishedFilter, FreezeAllFilter)
# Inlet Channel Plumbing
FiChannelCoupling_Origin :=
    if SedOutletVertPipe_Origin[1] ≥ FiInletChannel_Origin[1]
        FiInletChannel_Origin + [
            CouplingLength(ND_FiEntrancePipe) - SocketDepth(ND_FiEntrancePipe);
            S_Fitting + ConRadius(ND_FiEntrancePipe);
            S_Fitting + ConRadius(ND_FiEntrancePipe)
        ]
    otherwise
        FiInletChannel_Origin + [
            -S_Fitting - ConRadius(ND_FiEntrancePipe);
            -SocketDepth(ND_FiEntrancePipe);
            S_Fitting + ConRadius(ND_FiEntrancePipe)
        ]
FiChannelCoupling_Origin := [
    FiInletChannel_Origin[0] + CouplingLength(ND_FiEntrancePipe) - SocketDepth(ND_FiEntrancePipe);
    SedOutletCoupling_Origin[1];
    SedOutletElbow1_Origin[2] - ElbowRadius(ND_FiEntrancePipe)
]  # This is a temporary redefinition to make it work for San Nicolas. We need to plan the sed tank/filter connection more carefully.
L_FiInletYChannelPipe := max(0, Et_Origin[1] - W_Fi - T_PlantWall - W_EtWalkway - T_FiWall - Fi_origin[1] + (Plant_Origin[1] - max((W_Fi + T_FiWall)*N_Fi, (2*W_FiEntrance + W_FiOverflow + 4*T_PlantWall)*ceil(N_Fi/2) - T_PlantWall + (W_Fi - W_FiOverflow/2 - T_PlantWall - W_FiEntrance + T_FiWall/2))) - ElbowRadius(ND_FiEntrancePipe) - CouplingLength(ND_FiEntrancePipe) + SocketDepth(ND_FiEntrancePipe) - SedOutletCoupling_Origin[1])
FiInletCouplingLayer := layer_new("FiInletChannelFittingsPlu", green)
FiInletCoupling := CouplingSUBF(FiChannelCoupling_Origin, [
    {
        90 if L_FiInletYChannelPipe > 0
        0 otherwise
    };
    0
]*deg, ND_FiEntrancePipe, PS_Default, ["FiInletchannelCon"])
FiInletElbow := ElbowF(FiChannelCoupling_Origin - [0; L_FiInletYChannelPipe + CouplingLength(ND_FiEntrancePipe) - 2*SocketDepth(ND_FiEntrancePipe); 0], [180; 0; 0]*deg, ND_FiEntrancePipe, PS_Default)
FiInletCouplingFrz := FreezeLayer("FiInletChannelFittingsPlu")
L_FiInletChannelXPipe := SedOutletVertPipe_Origin[0] - ElbowRadius(ND_FiEntrancePipe) - FiChannelCoupling_Origin[0]
FiInletChannelPipeLayer := layer_new("FiInletChannelPipePlu", blue)
FiInletChannelYPipe := PipeSUBF(FiChannelCoupling_Origin - [0; CouplingLength(ND_FiEntrancePipe) - 2*SocketDepth(ND_FiEntrancePipe); 0], L_FiInletYChannelPipe, [90; 0]*deg, ND_FiEntrancePipe, PS_Default, ["FiInletchannelCon"])
FiInletHorizPipeStart := SedOutletElbow1_Origin[0] - ElbowRadius(ND_FiEntrancePipe)
FiInletHorizPipeEnd := FiInletChannel_Origin[0] - L_Sed - 2*T_ChannelWall - W_DC + CouplingLength(ND_FiEntrancePipe) - SocketDepth(ND_FiEntrancePipe)
FiInletChannelXPipe_Origin := [
    SedOutletVertPipe_Origin[0] - ElbowRadius(ND_FiEntrancePipe);
    -(L_FiInletYChannelPipe + ElbowRadius(ND_FiEntrancePipe)*(L_FiInletYChannelPipe > 0) + (L_FiInletYChannelPipe > 0)*(CouplingLength(ND_FiEntrancePipe) - 2*SocketDepth(ND_FiEntrancePipe))) + FiChannelCoupling_Origin[1];
    FiChannelCoupling_Origin[2]
]
FiInletChannelXPipe := PipeSUBF(FiInletChannelXPipe_Origin, L_FiInletChannelXPipe, [0; 0]*deg, ND_FiEntrancePipe, PS_Default, ["SedTankCon"])
FiInletChannelPipeFrz := FreezeLayer("FiInletChannelPipePlu")
FiChannelPlumbing :=
    stack(FiInletCouplingLayer, FiInletCoupling, FiInletCouplingFrz, FiInletChannelPipeLayer, FiInletChannelXPipe, FiInletChannelPipeFrz) if L_FiInletYChannelPipe ≤ 0
    stack(FiInletCouplingLayer, FiInletCoupling, FiInletElbow, FiInletCouplingFrz, FiInletChannelPipeLayer, FiInletChannelXPipe, FiInletChannelYPipe, FiInletChannelPipeFrz) otherwise
# Plant Floor Subtractions for Filter (dependent on filter origin)
ThawPlantFloor := ThawMultiple(["OpWalkwayCon"])
FiSubBox_Origin := [
    Fi_OriginNew[0] - L_Fi - T_FiWall - zc;
    Fi_OriginNew[1] + W_Fi + T_FiWall;
    Z_Walkway - T_Floor - zc
]
FiSubBox_Dim := [L_Fi + 2*T_FiWall + zc; -N_Fi*W_Fi - (N_Fi + 1)*T_FiWall; T_Floor + zc]
FiSubBox := BoxF(FiSubBox_Origin, FiSubBox_Origin + FiSubBox_Dim, [0; 0; 0]*deg)
FiInletChannelSubBox_Origin := [
    FiInletChannel_Origin[0] + T_PlantWall - Fi_origin[0] + Fi_OriginNew[0];
    FiInletChannel_Origin[1] - T_PlantWall - Fi_origin[1] + Fi_OriginNew[1];
    Z_Walkway - T_Floor - zc
]
FiInletChannelSubBox_Dim := [-W_FiInletChannel - T_PlantWall; L_FiInletChannel + 2*T_PlantWall; T_Floor + zc]
FiInletChannelSubBox := BoxF(FiInletChannelSubBox_Origin, FiInletChannelSubBox_Origin + FiInletChannelSubBox_Dim, [0; 0; 0]*deg)
FiEntAndExitSubBox_Origin := [
    FiEntranceBox_origin[0] + T_PlantWall - Fi_origin[0] + Fi_OriginNew[0];
    FiEntranceBox_origin[1] + W_FiEntrance + T_PlantWall - Fi_origin[1] + Fi_OriginNew[1];
    Z_Walkway - T_Floor - zc
]
FiEntAndExitSubBox_Dim := [
    -(L_FiEntrance + L_FiExit + 3*T_PlantWall);
    -N_Fi*(W_FiEntrance + 2*T_PlantWall) - trunc(N_Fi/2)*W_FiOverflow;
    T_Floor + zc
]
FiEntAndExitSubBox := BoxF(FiEntAndExitSubBox_Origin, FiEntAndExitSubBox_Origin + FiEntAndExitSubBox_Dim, [0; 0; 0]*deg)
FiSiphonHole := BoxF([
    Fi_OriginNew[0] + T_PlantWall;
    Et_Origin[1] - W_Fi - T_PlantWall - W_EtWalkway - T_FiWall - Fi_origin[1] + Fi_OriginNew[1];
    Z_Walkway - T_Floor - zc
], [
    Fi_OriginNew[0] + T_PlantWall + 2*SocketDepth(ND_FiSiphon) + ShortTeeLength(ND_FiSiphon) + ConRadius(ND_FiSiphon) + 5 cm;
    Et_Origin[1] - W_Fi - T_PlantWall - W_EtWalkway - T_FiWall + T_ConcreteMin + 2*ConRadius(ND_FiSiphon) + 5 cm - Fi_origin[1] + Fi_OriginNew[1];
    Z_Walkway
], [0; 0; 0]*deg)
MirrorSiphonHole := MirrorLast([Fi_OriginNew[0] + T_PlantWall - zc; Fi_OriginNew[1] - T_PlantWall], [Fi_OriginNew[0] + T_PlantWall + zc; Fi_OriginNew[1] - T_PlantWall], "N")
# Need to fix this if there are more than 2 filters.
SubtractFilterBoxes := SubtractF(["OpWalkwayCon"], "DeleteMe")
ArraySiphonHole := ArrayLast(N_Fi, 1, -(W_Fi + T_FiWall))
ChlorPlatformHole_Origin := [
    FiExitBox_origin[0] - T_PlantWall - L_FiExit - Fi_origin[0] + Fi_OriginNew[0] - outerdiameter(1 in);
    FiEntranceBox_origin[1] - T_PlantWall - Fi_origin[1] + Fi_OriginNew[1];
    Z_Walkway - T_Floor - zc
]
ChlorPlatformHole := CylinderF(ChlorPlatformHole_Origin, outerdiameter(1 in), T_Floor + zc, [0; 90]*deg)
FreezeFloor := FreezeMultiple(["OpWalkwayCon"])
FilterFloorSub :=
    stack(ThawPlantFloor, FiSubBox, FiInletChannelSubBox, FiEntAndExitSubBox, FiSiphonHole, MirrorSiphonHole, ChlorPlatformHole, GroupAll("DeleteMe"), SubtractFilterBoxes, FreezeFloor) if N_Fi == 2
    stack(ThawPlantFloor, FiSubBox, FiInletChannelSubBox, FiEntAndExitSubBox, FiSiphonHole, ChlorPlatformHole, GroupAll("DeleteMe"), SubtractFilterBoxes, FreezeFloor) otherwise
# Drain Channel Upper Walls
SelectMainDrainChannel := SelectLayer("DrainChannelCon")
DCWestWall := BoxF([
    Plant_Origin[0] - L_Sed - T_PlantWall - W_DC;
    Plant_Origin[1] - T_PlantWall;
    min(Z_Walkway - T_PlantWall - H_HumanAccess, Plant_Origin[2] - T_PlantWall)
], [
    Plant_Origin[0] - L_Sed - W_DC - 2*T_PlantWall;
    Plant_Origin[1] - T_PlantWall + L_DC;
    Z_Walkway - T_PlantWall
], [0; 0; 0]*deg)
DCEastWall := BoxF([
    Plant_Origin[0] - L_Sed;
    Plant_Origin[1] - T_PlantWall;
    min(Z_Walkway - T_PlantWall - H_HumanAccess, Plant_Origin[2] - T_PlantWall)
], [
    Plant_Origin[0] - L_Sed - T_PlantWall;
    Plant_Origin[1] - T_PlantWall + L_DC;
    Z_Walkway - T_PlantWall
], [0; 0; 0]*deg)
FrzDrainChannel := FreezeLayer("DrainChannelCon")
FiInletChannelDCCutout := BoxF([
    Plant_Origin[0] - L_Sed - T_PlantWall - W_DC;
    FiInletChannel_Origin[1] + Fi_OriginNew[1] - Fi_origin[1] - T_PlantWall;
    FiInletChannel_Origin[2] - T_PlantWall
], [
    Plant_Origin[0] - L_Sed - W_DC - 2*T_PlantWall;
    FiInletChannel_Origin[1] + Fi_OriginNew[1] - Fi_origin[1] + 2*T_PlantWall + L_FiInletChannel;
    Z_Walkway - T_PlantWall
], [0; 0; 0]*deg)
SedDCCutout := BoxF([Plant_Origin[0] - L_Sed; Plant_Origin[1] - T_PlantWall; Plant_Origin[2] - T_PlantWall], [
    Plant_Origin[0] - L_Sed - T_PlantWall;
    Plant_Origin[1] + W_Sed*N_SedTanks + T_PlantWall*N_SedTanks;
    Z_Walkway - T_PlantWall
], [0; 0; 0]*deg)
FlocDCCutout := BoxF([Plant_Origin[0] - L_Sed; Floc_Origin[1]; Floc_Origin[2] - T_PlantWall], [
    Plant_Origin[0] - L_Sed - T_PlantWall;
    Floc_Origin[1] + (W_FlocChannel + T_PlantWall)*N_FlocChannels;
    Z_Walkway - T_PlantWall
], [0; 0; 0]*deg)
EtDCCutout := BoxF([Plant_Origin[0] - L_Sed; Et_Origin[1] - T_PlantWall; Et_Origin[2] - T_PlantWall - 30 cm], [Plant_Origin[0] - L_Sed - T_PlantWall; Et_Origin[1] + W_Et + T_PlantWall; Z_Walkway - T_PlantWall], [0; 0; 0]*deg)
SubtractDCCutouts := SubtractF(["DrainChannelCon"], "DeleteMe")
DCUpperWalls := stack(SelectMainDrainChannel, DCWestWall, DCEastWall, Union_All, FrzDrainChannel, FiInletChannelDCCutout, SedDCCutout, FlocDCCutout, EtDCCutout, GroupDelete, SubtractDCCutouts)
AC_ZPlantLayout := stack(FlipTanks, MoveFilterFinal, FilterFloorSub, FiChannelPlumbing, DCUpperWalls)
