# [reference: MasterProgram.xmcd]
FilterInletTank_origin := [
    Plant_Origin[0];
    Plant_Origin[1] - T_PlantWall - W_ExitChannel;
    Plant_Origin[2] + H_Sed - H_ExitChannel
] = [0; -0.523167; 1.38183] m
FiEntranceBox_dim := [L_FiEntrance; W_FiEntrance; H_FiEntrance]
FiEntranceBox_origin := [
    Plant_Origin[0] - W_ExitChannel - T_PlantWall;
    Plant_Origin[1] - W_FiEntrance - T_PlantWall;
    Z_FiEntranceBottom
]
FiExitBox_dim := [L_FiExit; W_FiExit; H_FiExit]
FiExitBox_origin := [
    Plant_Origin[0] - W_ExitChannel - 2*T_PlantWall - L_FiEntrance;
    Plant_Origin[1] - W_FiExit - T_PlantWall;
    Z_FiExitBottom
]
Fi_origin := [
    Plant_Origin[0] - W_ExitChannel - 4*T_PlantWall - L_FiEntrance - L_FiExit - W_MpWalkway;
    Plant_Origin[1] - W_Fi - 1.5*T_PlantWall - OuterDiameterFittingPVC(ND_FiBwTrunk) - 1.5*T_ConcreteMin;
    Z_FiBottom
]
Fi_dim := [L_Fi; W_Fi + OuterDiameterFittingPVC(ND_FiBwTrunk) + 1.5*T_ConcreteMin + .5*T_PlantWall; H_Fi] = [1.1; 1.71481; 3.74363] m
W_Fi + OuterDiameterFittingPVC(ND_FiBwTrunk) + 1.5*T_ConcreteMin + .5*T_PlantWall
FiEnclosureTank_origin := [Plant_Origin[0] - W_ExitChannel - 2*T_PlantWall; Plant_Origin[1] - 2*W_Fi; 0]
FiBwInletCoupling_origin := [
    Plant_Origin[0] - W_ExitChannel - T_PlantWall - 0.5*ND_FiBwTrunk - T_ConcreteMin;
    Plant_Origin[1] - T_PlantWall - 0.5*ND_FiBwTrunk - T_ConcreteMin;
    Z_FiEntranceBottom - CouplingLength(ND_FiBwTrunk) + SocketDepth(ND_FiBwTrunk)
] = [-0.674767; -0.3016; 0.690067] m
FiInletCoupling1_origin := [
    Plant_Origin[0] - W_ExitChannel - T_PlantWall - L_FiEntrance + (0.5*ND_FiTrunk) + T_ConcreteMin;
    Plant_Origin[1] - T_PlantWall - 0.5*ND_FiTrunk - T_ConcreteMin;
    Z_FiEntranceBottom - CouplingLength(ND_FiTrunk) + SocketDepth(ND_FiTrunk)
]
FiInletCoupling2_origin := [
    Plant_Origin[0] - W_ExitChannel - T_PlantWall - 0.5*ND_FiBwTrunk - T_ConcreteMin;
    Plant_Origin[1] - T_PlantWall - 2.5*ND_FiBwTrunk - T_ConcreteMin;
    Z_FiEntranceBottom - CouplingLength(ND_FiTrunk) + SocketDepth(ND_FiTrunk)
]
FiInletCoupling3_origin := [
    Plant_Origin[0] - W_ExitChannel - T_PlantWall - L_FiEntrance + (0.5*ND_FiTrunk) + T_ConcreteMin;
    Plant_Origin[1] - T_PlantWall - 2.5*ND_FiBwTrunk - T_ConcreteMin;
    Z_FiEntranceBottom - CouplingLength(ND_FiTrunk) + SocketDepth(ND_FiTrunk)
]
FiExitCoupling0_origin := [
    Plant_Origin[0] - W_ExitChannel - 2*T_PlantWall - 0.5*ND_FiTrunk - T_ConcreteMin - L_FiEntrance;
    Plant_Origin[1] - T_PlantWall - 0.5*ND_FiTrunk - T_ConcreteMin;
    Z_FiExitBottom - CouplingLength(ND_FiTrunk) + SocketDepth(ND_FiTrunk)
]
FiExitCoupling1_origin := [
    Plant_Origin[0] - W_ExitChannel - 2*T_PlantWall - 2*L_FiEntrance + (0.5*ND_FiTrunk) + T_ConcreteMin;
    Plant_Origin[1] - T_PlantWall - 0.5*ND_FiTrunk - T_ConcreteMin;
    Z_FiExitBottom - CouplingLength(ND_FiTrunk) + SocketDepth(ND_FiTrunk)
]
FiExitCoupling2_origin := [
    Plant_Origin[0] - W_ExitChannel - 2*T_PlantWall - 0.5*ND_FiBwTrunk - T_ConcreteMin - L_FiEntrance;
    Plant_Origin[1] - T_PlantWall - W_FiExit + T_ConcreteMin + 0.5*ND_FiTrunk;
    Z_FiExitBottom - CouplingLength(ND_FiTrunk) + SocketDepth(ND_FiTrunk)
]
FiExitCoupling3_origin := [
    Plant_Origin[0] - W_ExitChannel - 2*T_PlantWall - 2*L_FiEntrance + (0.5*ND_FiTrunk) + T_ConcreteMin;
    Plant_Origin[1] - T_PlantWall - W_FiExit + T_ConcreteMin + 0.5*ND_FiTrunk;
    Z_FiExitBottom - CouplingLength(ND_FiTrunk) + SocketDepth(ND_FiTrunk)
]
FiEntranceWeir_origin := [Plant_Origin[0] - W_ExitChannel; Plant_Origin[1] - W_FiEntrance - T_PlantWall; Z_FiEntranceWeir]
# Script Variables
# InletChannel | Need to account for situation when Filter = 1
layer1 := layer_new("FilterInletChannel", ltgrey)
channel1 := ChannelDrawing([Plant_Origin[0] - W_ExitChannel; 0; Plant_Origin[2] + H_Sed - H_ExitChannel], [W_FiEntrance + W_FiOverflow/2 + 2*T_PlantWall; W_ExitChannel; H_ExitChannel], T_ChannelWall)
rotate1 := rotate([Plant_Origin[0] - W_ExitChannel; 0; Plant_Origin[2] + H_Sed - H_ExitChannel], 270)
box1 := BoxF([
    FiEntranceWeir_origin[0];
    Plant_Origin[1] - T_PlantWall - W_FiEntrance + SF_Fi;
    FiEntranceWeir_origin[2]
], [
    FiEntranceWeir_origin[0] - T_PlantWall;
    Plant_Origin[1] - T_PlantWall - SF_Fi;
    Plant_Origin[2] + H_Sed
], [0; 0; 0]*deg)
endboxif1 := BoxF([
    FiEntranceBox_origin[0] + T_PlantWall;
    FiEntranceBox_origin[1] - T_PlantWall - W_FiOverflow/2;
    Plant_Origin[2] + H_Sed - H_ExitChannel
], [Plant_Origin[0]; FiEntranceBox_origin[1] - T_PlantWall; Plant_Origin[2] + H_Sed], [0; 0; 0]*deg)
endboxif2 := BoxF([
    FiEntranceBox_origin[0] + T_PlantWall;
    FiEntranceBox_origin[1] - 3*T_PlantWall - W_FiOverflow - W_FiEntrance;
    Plant_Origin[2] + H_Sed - H_ExitChannel
], [
    Plant_Origin[0];
    FiEntranceBox_origin[1] - 2*T_PlantWall - W_FiOverflow - W_FiEntrance;
    Plant_Origin[2] + H_Sed
], [0; 0; 0]*deg)
group := FreezeLayer("FilterInletChannel")
entweir1 := BoxF([
    FiEntranceWeir_origin[0];
    Plant_Origin[1] - T_PlantWall - W_FiEntrance + SF_Fi;
    FiEntranceWeir_origin[2]
], [
    FiEntranceWeir_origin[0] - T_PlantWall;
    Plant_Origin[1] - T_PlantWall - SF_Fi;
    Plant_Origin[2] + H_Sed
], [0; 0; 0]*deg)
entweir2 := BoxF([
    FiEntranceWeir_origin[0];
    Plant_Origin[1] - (3*T_PlantWall) - (2*W_FiEntrance) - W_FiOverflow + SF_Fi;
    FiEntranceWeir_origin[2]
], [
    FiEntranceWeir_origin[0] - T_PlantWall;
    Plant_Origin[1] - (3*T_PlantWall) - W_FiEntrance - W_FiOverflow - SF_Fi;
    Plant_Origin[2] + H_Sed
], [0; 0; 0]*deg)
group2 := GroupAll("DeleteMe")
subtractw := SubtractF(["FilterInletChannel"], "DeleteMe")
bigunion := union_allA
layerfreeze2 := FreezeLayer("FilterInletChannel")
filterscript :=
    stack(layer1, channel1, rotate1, box1, endboxif1, group, entweir1, group2, subtractw, bigunion, layerfreeze2) if N_Fi == 1
    stack(layer1, channel1, rotate1, box1, endboxif2, group, entweir1, group2, subtractw, bigunion, layerfreeze2) otherwise
# Filter Script:
layernewfilt := layer_new("SRSF filters", ltgrey)
tankfilt := Tank(Fi_origin, Fi_dim, T_PlantWall)
addbox := BoxF([Fi_origin[0] + T_PlantWall; Fi_origin[1] - T_PlantWall; Fi_origin[2] - T_PlantWall], [Fi_origin[0] - Fi_dim[0] - T_PlantWall; Fi_origin[1] + Fi_dim[1] + T_PlantWall; Fi_origin[2]], [0; 0; 0]*deg)
group3 := FreezeLayer("SRSF filters")
layernewcouplings := layer_new("filtcouplings", green)
bwcoupling1 := CouplingSUBF([
    Fi_origin[0] + CouplingLength(ND_FiBwTrunk) - SocketDepth(ND_FiBwTrunk);
    FiBwInletCoupling_origin[1];
    Fi_origin[2] + outerdiameter(ND_FiBwManBranch)/2
], [0; 0]*deg, ND_FiBwTrunk, EN_PipeSpec, ["SRSF filters"])
coupling12 := CouplingSUBF([
    Fi_origin[0] + CouplingLength(ND_FiTrunk) - SocketDepth(ND_FiTrunk);
    FiBwInletCoupling_origin[1];
    Fi_origin[2] + outerdiameter(ND_FiBwManBranch)/2 + 20 cm
], [0; 0]*deg, ND_FiTrunk, EN_PipeSpec, ["SRSF filters"])
coupling13 := CouplingSUBF([
    Fi_origin[0] + CouplingLength(ND_FiTrunk) - SocketDepth(ND_FiTrunk);
    FiBwInletCoupling_origin[1];
    Fi_origin[2] + outerdiameter(ND_FiBwManBranch)/2 + 40 cm
], [0; 0]*deg, ND_FiTrunk, EN_PipeSpec, ["SRSF filters"])
coupling14 := CouplingSUBF([
    Fi_origin[0] + CouplingLength(ND_FiTrunk) - SocketDepth(ND_FiTrunk);
    FiBwInletCoupling_origin[1];
    Fi_origin[2] + outerdiameter(ND_FiBwManBranch)/2 + 60 cm
], [0; 0]*deg, ND_FiTrunk, EN_PipeSpec, ["SRSF filters"])
coupling15 := CouplingSUBF([
    Fi_origin[0] + CouplingLength(ND_FiTrunk) - SocketDepth(ND_FiTrunk);
    FiBwInletCoupling_origin[1];
    Fi_origin[2] + outerdiameter(ND_FiBwManBranch)/2 + 80 cm
], [0; 0]*deg, ND_FiTrunk, EN_PipeSpec, ["SRSF filters"])
coupling16 := CouplingSUBF([
    Fi_origin[0] + CouplingLength(ND_FiTrunk) - SocketDepth(ND_FiTrunk);
    FiBwInletCoupling_origin[1];
    Fi_origin[2] + outerdiameter(ND_FiBwManBranch)/2 + 100 cm
], [0; 0]*deg, ND_FiTrunk, EN_PipeSpec, ["SRSF filters"])
coupling17 := CouplingSUBF([
    Fi_origin[0] + CouplingLength(ND_FiTrunk) - SocketDepth(ND_FiTrunk);
    FiBwInletCoupling_origin[1];
    Fi_origin[2] + outerdiameter(ND_FiBwManBranch)/2 + 120 cm
], [0; 0]*deg, ND_FiTrunk, EN_PipeSpec, ["SRSF filters"])
siphonc1 := CouplingSUBF([
    Fi_origin[0] + CouplingLength(ND_FiSiphon) - SocketDepth(ND_FiSiphon);
    Fi_origin[1] + T_ConcreteMin + OuterDiameterFittingPVC(ND_FiSiphon)/2;
    Z_FiSiphonCoupling
], [0; 0]*deg, ND_FiSiphon, EN_PipeSpec, ["SRSF filters"])
layerset := layer_set("0")
layerfreezeco := FreezeLayer("filtcouplings")
mirror1 := Mirror3dGroup("filtercouplings", "y", [Fi_origin[0]; Fi_origin[1] - T_PlantWall; Fi_origin[2]], "n")
layerman := layer_new("filter manifolds", blue)
man1 := ManifoldF([
    Fi_origin[0] + SocketDepth(ND_FiTrunk);
    FiBwInletCoupling_origin[1];
    Fi_origin[2] + outerdiameter(ND_FiBwManBranch)/2
], L_Fi + SocketDepth(ND_FiTrunk), [0; 0; 90]*deg, ND_FiBwTrunk, EN_PipeSpec, N_FiManBranch, ND_FiManBranch)
man2 := ManifoldF([
    Fi_origin[0] + SocketDepth(ND_FiTrunk);
    FiBwInletCoupling_origin[1];
    Fi_origin[2] + outerdiameter(ND_FiBwManBranch)/2 + 20 cm
], L_Fi + SocketDepth(ND_FiTrunk), [0; 0; 90]*deg, ND_FiTrunk, EN_PipeSpec, N_FiManBranch, ND_FiManBranch)
man3 := ManifoldF([
    Fi_origin[0] + SocketDepth(ND_FiTrunk);
    FiBwInletCoupling_origin[1];
    Fi_origin[2] + outerdiameter(ND_FiBwManBranch)/2 + 40 cm
], L_Fi + SocketDepth(ND_FiTrunk), [0; 0; 90]*deg, ND_FiTrunk, EN_PipeSpec, N_FiManBranch, ND_FiManBranch)
man4 := ManifoldF([
    Fi_origin[0] + SocketDepth(ND_FiTrunk);
    FiBwInletCoupling_origin[1];
    Fi_origin[2] + outerdiameter(ND_FiBwManBranch)/2 + 60 cm
], L_Fi + SocketDepth(ND_FiTrunk), [0; 0; 90]*deg, ND_FiTrunk, EN_PipeSpec, N_FiManBranch, ND_FiManBranch)
man5 := ManifoldF([
    Fi_origin[0] + SocketDepth(ND_FiTrunk);
    FiBwInletCoupling_origin[1];
    Fi_origin[2] + outerdiameter(ND_FiBwManBranch)/2 + 80 cm
], L_Fi + SocketDepth(ND_FiTrunk), [0; 0; 90]*deg, ND_FiTrunk, EN_PipeSpec, N_FiManBranch, ND_FiManBranch)
man6 := ManifoldF([
    Fi_origin[0] + SocketDepth(ND_FiTrunk);
    FiBwInletCoupling_origin[1];
    Fi_origin[2] + outerdiameter(ND_FiBwManBranch)/2 + 100 cm
], L_Fi + SocketDepth(ND_FiTrunk), [0; 0; 90]*deg, ND_FiTrunk, EN_PipeSpec, N_FiManBranch, ND_FiManBranch)
man7 := ManifoldF([
    Fi_origin[0] + SocketDepth(ND_FiTrunk);
    FiBwInletCoupling_origin[1];
    Fi_origin[2] + outerdiameter(ND_FiBwManBranch)/2 + 120 cm
], L_Fi + SocketDepth(ND_FiTrunk), [0; 0; 90]*deg, ND_FiTrunk, EN_PipeSpec, N_FiManBranch, ND_FiManBranch)
layerfrman := FreezeLayer("filter manifolds")
rotateman := RotateGroup("filter manifolds", "z", [FiBwInletCoupling_origin[1]], 90)
mirror2 := Mirror3dGroup("filter manifolds", "y", [Fi_origin[0]; Fi_origin[1] - T_PlantWall; Fi_origin[2]], "n")
layernewmbranches := layer_new("manifold branches", red)
ElbowRadius(ND_FiTrunk) = 0.2286 m
man1script :=
    for i ∈ 2 .. N_FiManBranch - 1
        Local ← stack(Local, PipeF([
            Fi_origin[0] + CouplingLength(ND_FiBwTrunk) - T_PlantWall - ((L_Fi + SocketDepth(ND_FiTrunk))/N_FiManBranch)*i - outerdiameter(ND_FiBwManBranch)/2 + (L_Fi + SocketDepth(ND_FiTrunk))/(2*N_FiManBranch);
            FiBwInletCoupling_origin[1] - outerdiameter(ND_FiTrunk)/2;
            Fi_origin[2] + outerdiameter(ND_FiBwManBranch)/2
        ], W_Fi + OuterDiameterFittingPVC(ND_FiBwTrunk) + 1.5*T_ConcreteMin - .5*T_PlantWall - ShortTeeLength(ND_FiTrunk), [90; 0; 90]*deg, ND_FiManBranch, EN_PipeSpec), TeeF([
            Fi_origin[0] + CouplingLength(ND_FiBwTrunk) - T_PlantWall - ((L_Fi + SocketDepth(ND_FiBwTrunk))/N_FiManBranch)*i - outerdiameter(ND_FiBwManBranch)/2 + (L_Fi + SocketDepth(ND_FiBwTrunk))/(2*N_FiManBranch);
            FiBwInletCoupling_origin[1] - outerdiameter(ND_FiTrunk)/2 - (W_Fi + OuterDiameterFittingPVC(ND_FiBwTrunk) + 1.5*T_ConcreteMin - .5*T_PlantWall - ElbowRadius(ND_FiTrunk)) - 2*ShortTeeLength(ND_FiManBranch);
            Fi_origin[2] + outerdiameter(ND_FiBwManBranch)/2
        ], [0; 0; 0]*deg, ND_FiManBranch, EN_PipeSpec))
    Local2 ← BoxF([Fi_origin[0]; Fi_origin[1]; Fi_origin[2]], [Fi_origin[0] - L_Fi; Fi_origin[1] + 5 cm; Fi_origin[2] - 5 cm], [0; 0; 0]*deg)
    Local3 ← Local3 ← BoxF([Fi_origin[0]; Fi_origin[1]; Fi_origin[2] + outerdiameter(ND_FiManBranch) + 2.5 cm], [Fi_origin[0] - L_Fi; Fi_origin[1] + 5 cm; Fi_origin[2] + 20 cm], [0; 0; 0]*deg)
    Local4 ← PipeF([
        Fi_origin[0] + CouplingLength(ND_FiBwTrunk) - T_PlantWall - ((L_Fi + SocketDepth(ND_FiTrunk))/N_FiManBranch) - outerdiameter(ND_FiManBranch)/2 + (L_Fi + SocketDepth(ND_FiTrunk))/(2*N_FiManBranch);
        FiBwInletCoupling_origin[1] - outerdiameter(ND_FiBwTrunk)/2;
        Fi_origin[2] + outerdiameter(ND_FiBwManBranch)/2
    ], W_Fi + OuterDiameterFittingPVC(ND_FiBwTrunk) + 1.5*T_ConcreteMin - .5*T_PlantWall - 4*ElbowRadius(ND_FiManBranch) - SocketDepth(ND_FiManBranch), [90; 0; 90]*deg, ND_FiManBranch, EN_PipeSpec)
    Local5 ← PipeF([
        Fi_origin[0] + CouplingLength(ND_FiBwTrunk) - T_PlantWall - (L_Fi + SocketDepth(ND_FiTrunk)) - outerdiameter(ND_FiManBranch)/2 + (L_Fi + SocketDepth(ND_FiTrunk))/(2*N_FiManBranch);
        FiBwInletCoupling_origin[1] - outerdiameter(ND_FiTrunk)/2;
        Fi_origin[2] + outerdiameter(ND_FiBwManBranch)/2
    ], W_Fi + OuterDiameterFittingPVC(ND_FiBwTrunk) + 1.5*T_ConcreteMin - .5*T_PlantWall - 4*ElbowRadius(ND_FiManBranch) - SocketDepth(ND_FiManBranch), [90; 0; 90]*deg, ND_FiManBranch, EN_PipeSpec)
    elbow1 ← ElbowF([
        Fi_origin[0] + CouplingLength(ND_FiBwTrunk) - T_PlantWall - ((L_Fi + SocketDepth(ND_FiTrunk))/N_FiManBranch) - outerdiameter(ND_FiManBranch)/2 + (L_Fi + SocketDepth(ND_FiTrunk))/(2*N_FiManBranch);
        FiBwInletCoupling_origin[1] - outerdiameter(ND_FiTrunk)/2 - (W_Fi + OuterDiameterFittingPVC(ND_FiBwTrunk) + 1.5*T_ConcreteMin - .5*T_PlantWall - 4*ElbowRadius(ND_FiManBranch));
        Fi_origin[2] + outerdiameter(ND_FiBwManBranch)/2
    ], [0; 0; 180]*deg, ND_FiManBranch, EN_PipeSpec)
    elbow2 ← ElbowF([
        Fi_origin[0] + CouplingLength(ND_FiBwTrunk) - T_PlantWall - (L_Fi + SocketDepth(ND_FiTrunk)) - outerdiameter(ND_FiManBranch)/2 + (L_Fi + SocketDepth(ND_FiTrunk))/(2*N_FiManBranch);
        FiBwInletCoupling_origin[1] - outerdiameter(ND_FiTrunk)/2 - (W_Fi + OuterDiameterFittingPVC(ND_FiBwTrunk) + 1.5*T_ConcreteMin - .5*T_PlantWall - 4*ElbowRadius(ND_FiManBranch));
        Fi_origin[2] + outerdiameter(ND_FiBwManBranch)/2
    ], [180; 0; 0]*deg, ND_FiManBranch, EN_PipeSpec)
    return stack(Local, Local2, Local3, Local4, Local5, elbow1, elbow2)
man2script :=
    for i ∈ 2 .. N_FiManBranch - 1
        Local ← stack(Local, PipeF([
            Fi_origin[0] + CouplingLength(ND_FiBwTrunk) - T_PlantWall - ((L_Fi + SocketDepth(ND_FiTrunk))/N_FiManBranch)*i - outerdiameter(ND_FiBwManBranch)/2 + (L_Fi + SocketDepth(ND_FiTrunk))/(2*N_FiManBranch);
            FiBwInletCoupling_origin[1] - outerdiameter(ND_FiTrunk)/2;
            Fi_origin[2] + outerdiameter(ND_FiBwManBranch)/2 + 20 cm
        ], W_Fi + OuterDiameterFittingPVC(ND_FiBwTrunk) + 1.5*T_ConcreteMin - .5*T_PlantWall - ShortTeeLength(ND_FiTrunk), [90; 0; 90]*deg, ND_FiManBranch, EN_PipeSpec), TeeF([
            Fi_origin[0] + CouplingLength(ND_FiBwTrunk) - T_PlantWall - ((L_Fi + SocketDepth(ND_FiTrunk))/N_FiManBranch)*i - outerdiameter(ND_FiBwManBranch)/2 + (L_Fi + SocketDepth(ND_FiTrunk))/(2*N_FiManBranch);
            FiBwInletCoupling_origin[1] - outerdiameter(ND_FiTrunk)/2 - (W_Fi + OuterDiameterFittingPVC(ND_FiBwTrunk) + 1.5*T_ConcreteMin - .5*T_PlantWall - ElbowRadius(ND_FiTrunk)) - 2*ShortTeeLength(ND_FiManBranch);
            Fi_origin[2] + outerdiameter(ND_FiBwManBranch)/2 + 20 cm
        ], [0; 0; 0]*deg, ND_FiManBranch, EN_PipeSpec))
    Local3 ← BoxF([Fi_origin[0]; Fi_origin[1]; Fi_origin[2] + 22.5 cm + outerdiameter(ND_FiManBranch)], [Fi_origin[0] - L_Fi; Fi_origin[1] + 5 cm; Fi_origin[2] + 40 cm], [0; 0; 0]*deg)
    Local4 ← PipeF([
        Fi_origin[0] + CouplingLength(ND_FiBwTrunk) - T_PlantWall - ((L_Fi + SocketDepth(ND_FiTrunk))/N_FiManBranch) - outerdiameter(ND_FiBwManBranch)/2 + (L_Fi + SocketDepth(ND_FiTrunk))/(2*N_FiManBranch);
        FiBwInletCoupling_origin[1] - outerdiameter(ND_FiTrunk)/2;
        Fi_origin[2] + outerdiameter(ND_FiBwManBranch)/2 + 20 cm
    ], W_Fi + OuterDiameterFittingPVC(ND_FiBwTrunk) + 1.5*T_ConcreteMin - .5*T_PlantWall - 4*ElbowRadius(ND_FiManBranch) - SocketDepth(ND_FiManBranch), [90; 0; 90]*deg, ND_FiManBranch, EN_PipeSpec)
    Local5 ← PipeF([
        Fi_origin[0] + CouplingLength(ND_FiBwTrunk) - T_PlantWall - (L_Fi + SocketDepth(ND_FiTrunk)) - outerdiameter(ND_FiManBranch)/2 + (L_Fi + SocketDepth(ND_FiTrunk))/(2*N_FiManBranch);
        FiBwInletCoupling_origin[1] - outerdiameter(ND_FiTrunk)/2;
        Fi_origin[2] + outerdiameter(ND_FiBwManBranch)/2 + 20 cm
    ], W_Fi + OuterDiameterFittingPVC(ND_FiBwTrunk) + 1.5*T_ConcreteMin - .5*T_PlantWall - 4*ElbowRadius(ND_FiManBranch) - SocketDepth(ND_FiManBranch), [90; 0; 90]*deg, ND_FiManBranch, EN_PipeSpec)
    elbow1 ← ElbowF([
        Fi_origin[0] + CouplingLength(ND_FiBwTrunk) - T_PlantWall - ((L_Fi + SocketDepth(ND_FiTrunk))/N_FiManBranch) - outerdiameter(ND_FiBwManBranch)/2 + (L_Fi + SocketDepth(ND_FiTrunk))/(2*N_FiManBranch);
        FiBwInletCoupling_origin[1] - outerdiameter(ND_FiTrunk)/2 - (W_Fi + OuterDiameterFittingPVC(ND_FiBwTrunk) + 1.5*T_ConcreteMin - .5*T_PlantWall - 4*ElbowRadius(ND_FiManBranch));
        Fi_origin[2] + outerdiameter(ND_FiBwManBranch)/2 + 20 cm
    ], [0; 0; 180]*deg, ND_FiManBranch, EN_PipeSpec)
    elbow2 ← ElbowF([
        Fi_origin[0] + CouplingLength(ND_FiBwTrunk) - T_PlantWall - (L_Fi + SocketDepth(ND_FiTrunk)) - outerdiameter(ND_FiManBranch)/2 + (L_Fi + SocketDepth(ND_FiTrunk))/(2*N_FiManBranch);
        FiBwInletCoupling_origin[1] - outerdiameter(ND_FiTrunk)/2 - (W_Fi + OuterDiameterFittingPVC(ND_FiBwTrunk) + 1.5*T_ConcreteMin - .5*T_PlantWall - 4*ElbowRadius(ND_FiManBranch));
        Fi_origin[2] + outerdiameter(ND_FiBwManBranch)/2 + 20 cm
    ], [180; 0; 0]*deg, ND_FiManBranch, EN_PipeSpec)
    return stack(Local, Local3, Local4, Local5, elbow1, elbow2)
man3script :=
    for i ∈ 2 .. N_FiManBranch - 1
        Local ← stack(Local, PipeF([
            Fi_origin[0] + CouplingLength(ND_FiBwTrunk) - T_PlantWall - ((L_Fi + SocketDepth(ND_FiTrunk))/N_FiManBranch)*i - outerdiameter(ND_FiBwManBranch)/2 + (L_Fi + SocketDepth(ND_FiTrunk))/(2*N_FiManBranch);
            FiBwInletCoupling_origin[1] - outerdiameter(ND_FiTrunk)/2;
            Fi_origin[2] + outerdiameter(ND_FiBwManBranch)/2 + 40 cm
        ], W_Fi + OuterDiameterFittingPVC(ND_FiBwTrunk) + 1.5*T_ConcreteMin - .5*T_PlantWall - ShortTeeLength(ND_FiTrunk), [90; 0; 90]*deg, ND_FiManBranch, EN_PipeSpec), TeeF([
            Fi_origin[0] + CouplingLength(ND_FiBwTrunk) - T_PlantWall - ((L_Fi + SocketDepth(ND_FiTrunk))/N_FiManBranch)*i - outerdiameter(ND_FiBwManBranch)/2 + (L_Fi + SocketDepth(ND_FiTrunk))/(2*N_FiManBranch);
            FiBwInletCoupling_origin[1] - outerdiameter(ND_FiTrunk)/2 - (W_Fi + OuterDiameterFittingPVC(ND_FiBwTrunk) + 1.5*T_ConcreteMin - .5*T_PlantWall - ElbowRadius(ND_FiTrunk)) - 2*ShortTeeLength(ND_FiManBranch);
            Fi_origin[2] + outerdiameter(ND_FiBwManBranch)/2 + 40 cm
        ], [0; 0; 0]*deg, ND_FiManBranch, EN_PipeSpec))
    Local3 ← BoxF([Fi_origin[0]; Fi_origin[1]; Fi_origin[2] + 42.5 cm + outerdiameter(ND_FiManBranch)], [Fi_origin[0] - L_Fi; Fi_origin[1] + 5 cm; Fi_origin[2] + 60 cm], [0; 0; 0]*deg)
    Local4 ← PipeF([
        Fi_origin[0] + CouplingLength(ND_FiBwTrunk) - T_PlantWall - ((L_Fi + SocketDepth(ND_FiTrunk))/N_FiManBranch) - outerdiameter(ND_FiBwManBranch)/2 + (L_Fi + SocketDepth(ND_FiTrunk))/(2*N_FiManBranch);
        FiBwInletCoupling_origin[1] - outerdiameter(ND_FiTrunk)/2;
        Fi_origin[2] + outerdiameter(ND_FiBwManBranch)/2 + 40 cm
    ], W_Fi + OuterDiameterFittingPVC(ND_FiBwTrunk) + 1.5*T_ConcreteMin - .5*T_PlantWall - 4*ElbowRadius(ND_FiManBranch) - SocketDepth(ND_FiManBranch), [90; 0; 90]*deg, ND_FiManBranch, EN_PipeSpec)
    Local5 ← PipeF([
        Fi_origin[0] + CouplingLength(ND_FiBwTrunk) - T_PlantWall - (L_Fi + SocketDepth(ND_FiTrunk)) - outerdiameter(ND_FiManBranch)/2 + (L_Fi + SocketDepth(ND_FiTrunk))/(2*N_FiManBranch);
        FiBwInletCoupling_origin[1] - outerdiameter(ND_FiTrunk)/2;
        Fi_origin[2] + outerdiameter(ND_FiBwManBranch)/2 + 40 cm
    ], W_Fi + OuterDiameterFittingPVC(ND_FiBwTrunk) + 1.5*T_ConcreteMin - .5*T_PlantWall - 4*ElbowRadius(ND_FiManBranch) - SocketDepth(ND_FiManBranch), [90; 0; 90]*deg, ND_FiManBranch, EN_PipeSpec)
    elbow1 ← ElbowF([
        Fi_origin[0] + CouplingLength(ND_FiBwTrunk) - T_PlantWall - ((L_Fi + SocketDepth(ND_FiTrunk))/N_FiManBranch) - outerdiameter(ND_FiBwManBranch)/2 + (L_Fi + SocketDepth(ND_FiTrunk))/(2*N_FiManBranch);
        FiBwInletCoupling_origin[1] - outerdiameter(ND_FiTrunk)/2 - (W_Fi + OuterDiameterFittingPVC(ND_FiBwTrunk) + 1.5*T_ConcreteMin - .5*T_PlantWall - 4*ElbowRadius(ND_FiManBranch));
        Fi_origin[2] + outerdiameter(ND_FiBwManBranch)/2 + 40 cm
    ], [0; 0; 180]*deg, ND_FiManBranch, EN_PipeSpec)
    elbow2 ← ElbowF([
        Fi_origin[0] + CouplingLength(ND_FiBwTrunk) - T_PlantWall - (L_Fi + SocketDepth(ND_FiTrunk)) - outerdiameter(ND_FiManBranch)/2 + (L_Fi + SocketDepth(ND_FiTrunk))/(2*N_FiManBranch);
        FiBwInletCoupling_origin[1] - outerdiameter(ND_FiTrunk)/2 - (W_Fi + OuterDiameterFittingPVC(ND_FiBwTrunk) + 1.5*T_ConcreteMin - .5*T_PlantWall - 4*ElbowRadius(ND_FiManBranch));
        Fi_origin[2] + outerdiameter(ND_FiBwManBranch)/2 + 40 cm
    ], [180; 0; 0]*deg, ND_FiManBranch, EN_PipeSpec)
    return stack(Local, Local3, Local4, Local5, elbow1, elbow2)
man4script :=
    for i ∈ 2 .. N_FiManBranch - 1
        Local ← stack(Local, PipeF([
            Fi_origin[0] + CouplingLength(ND_FiBwTrunk) - T_PlantWall - ((L_Fi + SocketDepth(ND_FiTrunk))/N_FiManBranch)*i - outerdiameter(ND_FiBwManBranch)/2 + (L_Fi + SocketDepth(ND_FiTrunk))/(2*N_FiManBranch);
            FiBwInletCoupling_origin[1] - outerdiameter(ND_FiTrunk)/2;
            Fi_origin[2] + outerdiameter(ND_FiBwManBranch)/2 + 60 cm
        ], W_Fi + OuterDiameterFittingPVC(ND_FiBwTrunk) + 1.5*T_ConcreteMin - .5*T_PlantWall - ShortTeeLength(ND_FiTrunk), [90; 0; 90]*deg, ND_FiManBranch, EN_PipeSpec), TeeF([
            Fi_origin[0] + CouplingLength(ND_FiBwTrunk) - T_PlantWall - ((L_Fi + SocketDepth(ND_FiTrunk))/N_FiManBranch)*i - outerdiameter(ND_FiBwManBranch)/2 + (L_Fi + SocketDepth(ND_FiTrunk))/(2*N_FiManBranch);
            FiBwInletCoupling_origin[1] - outerdiameter(ND_FiTrunk)/2 - (W_Fi + OuterDiameterFittingPVC(ND_FiBwTrunk) + 1.5*T_ConcreteMin - .5*T_PlantWall - ElbowRadius(ND_FiTrunk)) - 2*ShortTeeLength(ND_FiManBranch);
            Fi_origin[2] + outerdiameter(ND_FiBwManBranch)/2 + 60 cm
        ], [0; 0; 0]*deg, ND_FiManBranch, EN_PipeSpec))
    Local3 ← BoxF([Fi_origin[0]; Fi_origin[1]; Fi_origin[2] + 62.5 cm + outerdiameter(ND_FiManBranch)], [Fi_origin[0] - L_Fi; Fi_origin[1] + 5 cm; Fi_origin[2] + 80 cm], [0; 0; 0]*deg)
    Local4 ← PipeF([
        Fi_origin[0] + CouplingLength(ND_FiBwTrunk) - T_PlantWall - ((L_Fi + SocketDepth(ND_FiTrunk))/N_FiManBranch) - outerdiameter(ND_FiBwManBranch)/2 + (L_Fi + SocketDepth(ND_FiTrunk))/(2*N_FiManBranch);
        FiBwInletCoupling_origin[1] - outerdiameter(ND_FiTrunk)/2;
        Fi_origin[2] + outerdiameter(ND_FiBwManBranch)/2 + 60 cm
    ], W_Fi + OuterDiameterFittingPVC(ND_FiBwTrunk) + 1.5*T_ConcreteMin - .5*T_PlantWall - 4*ElbowRadius(ND_FiManBranch) - SocketDepth(ND_FiManBranch), [90; 0; 90]*deg, ND_FiManBranch, EN_PipeSpec)
    Local5 ← PipeF([
        Fi_origin[0] + CouplingLength(ND_FiBwTrunk) - T_PlantWall - (L_Fi + SocketDepth(ND_FiTrunk)) - outerdiameter(ND_FiManBranch)/2 + (L_Fi + SocketDepth(ND_FiTrunk))/(2*N_FiManBranch);
        FiBwInletCoupling_origin[1] - outerdiameter(ND_FiTrunk)/2;
        Fi_origin[2] + outerdiameter(ND_FiBwManBranch)/2 + 60 cm
    ], W_Fi + OuterDiameterFittingPVC(ND_FiBwTrunk) + 1.5*T_ConcreteMin - .5*T_PlantWall - 4*ElbowRadius(ND_FiManBranch) - SocketDepth(ND_FiManBranch), [90; 0; 90]*deg, ND_FiManBranch, EN_PipeSpec)
    elbow1 ← ElbowF([
        Fi_origin[0] + CouplingLength(ND_FiBwTrunk) - T_PlantWall - ((L_Fi + SocketDepth(ND_FiTrunk))/N_FiManBranch) - outerdiameter(ND_FiBwManBranch)/2 + (L_Fi + SocketDepth(ND_FiTrunk))/(2*N_FiManBranch);
        FiBwInletCoupling_origin[1] - outerdiameter(ND_FiTrunk)/2 - (W_Fi + OuterDiameterFittingPVC(ND_FiBwTrunk) + 1.5*T_ConcreteMin - .5*T_PlantWall - 4*ElbowRadius(ND_FiManBranch));
        Fi_origin[2] + outerdiameter(ND_FiBwManBranch)/2 + 60 cm
    ], [0; 0; 180]*deg, ND_FiManBranch, EN_PipeSpec)
    elbow2 ← ElbowF([
        Fi_origin[0] + CouplingLength(ND_FiBwTrunk) - T_PlantWall - (L_Fi + SocketDepth(ND_FiTrunk)) - outerdiameter(ND_FiManBranch)/2 + (L_Fi + SocketDepth(ND_FiTrunk))/(2*N_FiManBranch);
        FiBwInletCoupling_origin[1] - outerdiameter(ND_FiTrunk)/2 - (W_Fi + OuterDiameterFittingPVC(ND_FiBwTrunk) + 1.5*T_ConcreteMin - .5*T_PlantWall - 4*ElbowRadius(ND_FiManBranch));
        Fi_origin[2] + outerdiameter(ND_FiBwManBranch)/2 + 60 cm
    ], [180; 0; 0]*deg, ND_FiManBranch, EN_PipeSpec)
    return stack(Local, Local3, Local4, Local5, elbow1, elbow2)
man5script :=
    for i ∈ 2 .. N_FiManBranch - 1
        Local ← stack(Local, PipeF([
            Fi_origin[0] + CouplingLength(ND_FiBwTrunk) - T_PlantWall - ((L_Fi + SocketDepth(ND_FiTrunk))/N_FiManBranch)*i - outerdiameter(ND_FiBwManBranch)/2 + (L_Fi + SocketDepth(ND_FiTrunk))/(2*N_FiManBranch);
            FiBwInletCoupling_origin[1] - outerdiameter(ND_FiTrunk)/2;
            Fi_origin[2] + outerdiameter(ND_FiBwManBranch)/2 + 80 cm
        ], W_Fi + OuterDiameterFittingPVC(ND_FiBwTrunk) + 1.5*T_ConcreteMin - .5*T_PlantWall - ShortTeeLength(ND_FiTrunk), [90; 0; 90]*deg, ND_FiManBranch, EN_PipeSpec), TeeF([
            Fi_origin[0] + CouplingLength(ND_FiBwTrunk) - T_PlantWall - ((L_Fi + SocketDepth(ND_FiTrunk))/N_FiManBranch)*i - outerdiameter(ND_FiBwManBranch)/2 + (L_Fi + SocketDepth(ND_FiTrunk))/(2*N_FiManBranch);
            FiBwInletCoupling_origin[1] - outerdiameter(ND_FiTrunk)/2 - (W_Fi + OuterDiameterFittingPVC(ND_FiBwTrunk) + 1.5*T_ConcreteMin - .5*T_PlantWall - ElbowRadius(ND_FiTrunk)) - 2*ShortTeeLength(ND_FiManBranch);
            Fi_origin[2] + outerdiameter(ND_FiBwManBranch)/2 + 80 cm
        ], [0; 0; 0]*deg, ND_FiManBranch, EN_PipeSpec))
    Local3 ← BoxF([Fi_origin[0]; Fi_origin[1]; Fi_origin[2] + 82.5 cm + outerdiameter(ND_FiManBranch)], [Fi_origin[0] - L_Fi; Fi_origin[1] + 5 cm; Fi_origin[2] + 100 cm], [0; 0; 0]*deg)
    Local4 ← PipeF([
        Fi_origin[0] + CouplingLength(ND_FiBwTrunk) - T_PlantWall - ((L_Fi + SocketDepth(ND_FiTrunk))/N_FiManBranch) - outerdiameter(ND_FiBwManBranch)/2 + (L_Fi + SocketDepth(ND_FiTrunk))/(2*N_FiManBranch);
        FiBwInletCoupling_origin[1] - outerdiameter(ND_FiTrunk)/2;
        Fi_origin[2] + outerdiameter(ND_FiBwManBranch)/2 + 80 cm
    ], W_Fi + OuterDiameterFittingPVC(ND_FiBwTrunk) + 1.5*T_ConcreteMin - .5*T_PlantWall - 4*ElbowRadius(ND_FiManBranch) - SocketDepth(ND_FiManBranch), [90; 0; 90]*deg, ND_FiManBranch, EN_PipeSpec)
    Local5 ← PipeF([
        Fi_origin[0] + CouplingLength(ND_FiBwTrunk) - T_PlantWall - (L_Fi + SocketDepth(ND_FiTrunk)) - outerdiameter(ND_FiManBranch)/2 + (L_Fi + SocketDepth(ND_FiTrunk))/(2*N_FiManBranch);
        FiBwInletCoupling_origin[1] - outerdiameter(ND_FiTrunk)/2;
        Fi_origin[2] + outerdiameter(ND_FiBwManBranch)/2 + 80 cm
    ], W_Fi + OuterDiameterFittingPVC(ND_FiBwTrunk) + 1.5*T_ConcreteMin - .5*T_PlantWall - 4*ElbowRadius(ND_FiManBranch) - SocketDepth(ND_FiManBranch), [90; 0; 90]*deg, ND_FiManBranch, EN_PipeSpec)
    elbow1 ← ElbowF([
        Fi_origin[0] + CouplingLength(ND_FiBwTrunk) - T_PlantWall - ((L_Fi + SocketDepth(ND_FiTrunk))/N_FiManBranch) - outerdiameter(ND_FiBwManBranch)/2 + (L_Fi + SocketDepth(ND_FiTrunk))/(2*N_FiManBranch);
        FiBwInletCoupling_origin[1] - outerdiameter(ND_FiTrunk)/2 - (W_Fi + OuterDiameterFittingPVC(ND_FiBwTrunk) + 1.5*T_ConcreteMin - .5*T_PlantWall - 4*ElbowRadius(ND_FiManBranch));
        Fi_origin[2] + outerdiameter(ND_FiBwManBranch)/2 + 80 cm
    ], [0; 0; 180]*deg, ND_FiManBranch, EN_PipeSpec)
    elbow2 ← ElbowF([
        Fi_origin[0] + CouplingLength(ND_FiBwTrunk) - T_PlantWall - (L_Fi + SocketDepth(ND_FiTrunk)) - outerdiameter(ND_FiManBranch)/2 + (L_Fi + SocketDepth(ND_FiTrunk))/(2*N_FiManBranch);
        FiBwInletCoupling_origin[1] - outerdiameter(ND_FiTrunk)/2 - (W_Fi + OuterDiameterFittingPVC(ND_FiBwTrunk) + 1.5*T_ConcreteMin - .5*T_PlantWall - 4*ElbowRadius(ND_FiManBranch));
        Fi_origin[2] + outerdiameter(ND_FiBwManBranch)/2 + 80 cm
    ], [180; 0; 0]*deg, ND_FiManBranch, EN_PipeSpec)
    return stack(Local, Local3, Local4, Local5, elbow1, elbow2)
man6script :=
    for i ∈ 2 .. N_FiManBranch - 1
        Local ← stack(Local, PipeF([
            Fi_origin[0] + CouplingLength(ND_FiBwTrunk) - T_PlantWall - ((L_Fi + SocketDepth(ND_FiTrunk))/N_FiManBranch)*i - outerdiameter(ND_FiBwManBranch)/2 + (L_Fi + SocketDepth(ND_FiTrunk))/(2*N_FiManBranch);
            FiBwInletCoupling_origin[1] - outerdiameter(ND_FiTrunk)/2;
            Fi_origin[2] + outerdiameter(ND_FiBwManBranch)/2 + 100 cm
        ], W_Fi + OuterDiameterFittingPVC(ND_FiBwTrunk) + 1.5*T_ConcreteMin - .5*T_PlantWall - ShortTeeLength(ND_FiTrunk), [90; 0; 90]*deg, ND_FiManBranch, EN_PipeSpec), TeeF([
            Fi_origin[0] + CouplingLength(ND_FiBwTrunk) - T_PlantWall - ((L_Fi + SocketDepth(ND_FiTrunk))/N_FiManBranch)*i - outerdiameter(ND_FiBwManBranch)/2 + (L_Fi + SocketDepth(ND_FiTrunk))/(2*N_FiManBranch);
            FiBwInletCoupling_origin[1] - outerdiameter(ND_FiTrunk)/2 - (W_Fi + OuterDiameterFittingPVC(ND_FiBwTrunk) + 1.5*T_ConcreteMin - .5*T_PlantWall - ElbowRadius(ND_FiTrunk)) - 2*ShortTeeLength(ND_FiManBranch);
            Fi_origin[2] + outerdiameter(ND_FiBwManBranch)/2 + 100 cm
        ], [0; 0; 0]*deg, ND_FiManBranch, EN_PipeSpec))
    Local3 ← BoxF([Fi_origin[0]; Fi_origin[1]; Fi_origin[2] + 102.5 cm + outerdiameter(ND_FiManBranch)], [Fi_origin[0] - L_Fi; Fi_origin[1] + 5 cm; Fi_origin[2] + 120 cm], [0; 0; 0]*deg)
    Local4 ← PipeF([
        Fi_origin[0] + CouplingLength(ND_FiBwTrunk) - T_PlantWall - ((L_Fi + SocketDepth(ND_FiTrunk))/N_FiManBranch) - outerdiameter(ND_FiBwManBranch)/2 + (L_Fi + SocketDepth(ND_FiTrunk))/(2*N_FiManBranch);
        FiBwInletCoupling_origin[1] - outerdiameter(ND_FiTrunk)/2;
        Fi_origin[2] + outerdiameter(ND_FiBwManBranch)/2 + 100 cm
    ], W_Fi + OuterDiameterFittingPVC(ND_FiBwTrunk) + 1.5*T_ConcreteMin - .5*T_PlantWall - 4*ElbowRadius(ND_FiManBranch) - SocketDepth(ND_FiManBranch), [90; 0; 90]*deg, ND_FiManBranch, EN_PipeSpec)
    Local5 ← PipeF([
        Fi_origin[0] + CouplingLength(ND_FiBwTrunk) - T_PlantWall - (L_Fi + SocketDepth(ND_FiTrunk)) - outerdiameter(ND_FiManBranch)/2 + (L_Fi + SocketDepth(ND_FiTrunk))/(2*N_FiManBranch);
        FiBwInletCoupling_origin[1] - outerdiameter(ND_FiTrunk)/2;
        Fi_origin[2] + outerdiameter(ND_FiBwManBranch)/2 + 100 cm
    ], W_Fi + OuterDiameterFittingPVC(ND_FiBwTrunk) + 1.5*T_ConcreteMin - .5*T_PlantWall - 4*ElbowRadius(ND_FiManBranch) - SocketDepth(ND_FiManBranch), [90; 0; 90]*deg, ND_FiManBranch, EN_PipeSpec)
    elbow1 ← ElbowF([
        Fi_origin[0] + CouplingLength(ND_FiBwTrunk) - T_PlantWall - ((L_Fi + SocketDepth(ND_FiTrunk))/N_FiManBranch) - outerdiameter(ND_FiBwManBranch)/2 + (L_Fi + SocketDepth(ND_FiTrunk))/(2*N_FiManBranch);
        FiBwInletCoupling_origin[1] - outerdiameter(ND_FiTrunk)/2 - (W_Fi + OuterDiameterFittingPVC(ND_FiBwTrunk) + 1.5*T_ConcreteMin - .5*T_PlantWall - 4*ElbowRadius(ND_FiManBranch));
        Fi_origin[2] + outerdiameter(ND_FiBwManBranch)/2 + 100 cm
    ], [0; 0; 180]*deg, ND_FiManBranch, EN_PipeSpec)
    elbow2 ← ElbowF([
        Fi_origin[0] + CouplingLength(ND_FiBwTrunk) - T_PlantWall - (L_Fi + SocketDepth(ND_FiTrunk)) - outerdiameter(ND_FiManBranch)/2 + (L_Fi + SocketDepth(ND_FiTrunk))/(2*N_FiManBranch);
        FiBwInletCoupling_origin[1] - outerdiameter(ND_FiTrunk)/2 - (W_Fi + OuterDiameterFittingPVC(ND_FiBwTrunk) + 1.5*T_ConcreteMin - .5*T_PlantWall - 4*ElbowRadius(ND_FiManBranch));
        Fi_origin[2] + outerdiameter(ND_FiBwManBranch)/2 + 100 cm
    ], [180; 0; 0]*deg, ND_FiManBranch, EN_PipeSpec)
    return stack(Local, Local3, Local4, Local5, elbow1, elbow2)
man7script :=
    for i ∈ 2 .. N_FiManBranch - 1
        Local ← stack(Local, PipeF([
            Fi_origin[0] + CouplingLength(ND_FiBwTrunk) - T_PlantWall - ((L_Fi + SocketDepth(ND_FiTrunk))/N_FiManBranch)*i - outerdiameter(ND_FiBwManBranch)/2 + (L_Fi + SocketDepth(ND_FiTrunk))/(2*N_FiManBranch);
            FiBwInletCoupling_origin[1] - outerdiameter(ND_FiTrunk)/2;
            Fi_origin[2] + outerdiameter(ND_FiBwManBranch)/2 + 120 cm
        ], W_Fi + OuterDiameterFittingPVC(ND_FiBwTrunk) + 1.5*T_ConcreteMin - .5*T_PlantWall - ShortTeeLength(ND_FiTrunk), [90; 0; 90]*deg, ND_FiManBranch, EN_PipeSpec), TeeF([
            Fi_origin[0] + CouplingLength(ND_FiBwTrunk) - T_PlantWall - ((L_Fi + SocketDepth(ND_FiTrunk))/N_FiManBranch)*i - outerdiameter(ND_FiBwManBranch)/2 + (L_Fi + SocketDepth(ND_FiTrunk))/(2*N_FiManBranch);
            FiBwInletCoupling_origin[1] - outerdiameter(ND_FiTrunk)/2 - (W_Fi + OuterDiameterFittingPVC(ND_FiBwTrunk) + 1.5*T_ConcreteMin - .5*T_PlantWall - ElbowRadius(ND_FiTrunk)) - 2*ShortTeeLength(ND_FiManBranch);
            Fi_origin[2] + outerdiameter(ND_FiBwManBranch)/2 + 120 cm
        ], [0; 0; 0]*deg, ND_FiManBranch, EN_PipeSpec))
    Local3 ← BoxF([Fi_origin[0]; Fi_origin[1]; Fi_origin[2] + 122.5 cm + outerdiameter(ND_FiManBranch)], [Fi_origin[0] - L_Fi; Fi_origin[1] + 5 cm; Fi_origin[2] + 127.5 cm + outerdiameter(ND_FiManBranch)], [0; 0; 0]*deg)
    Local4 ← PipeF([
        Fi_origin[0] + CouplingLength(ND_FiBwTrunk) - T_PlantWall - ((L_Fi + SocketDepth(ND_FiTrunk))/N_FiManBranch) - outerdiameter(ND_FiBwManBranch)/2 + (L_Fi + SocketDepth(ND_FiTrunk))/(2*N_FiManBranch);
        FiBwInletCoupling_origin[1] - outerdiameter(ND_FiTrunk)/2;
        Fi_origin[2] + outerdiameter(ND_FiBwManBranch)/2 + 120 cm
    ], W_Fi + OuterDiameterFittingPVC(ND_FiBwTrunk) + 1.5*T_ConcreteMin - .5*T_PlantWall - 4*ElbowRadius(ND_FiManBranch) - SocketDepth(ND_FiManBranch), [90; 0; 90]*deg, ND_FiManBranch, EN_PipeSpec)
    elbow1 ← ElbowF([
        Fi_origin[0] + CouplingLength(ND_FiBwTrunk) - T_PlantWall - ((L_Fi + SocketDepth(ND_FiTrunk))/N_FiManBranch) - outerdiameter(ND_FiBwManBranch)/2 + (L_Fi + SocketDepth(ND_FiTrunk))/(2*N_FiManBranch);
        FiBwInletCoupling_origin[1] - outerdiameter(ND_FiTrunk)/2 - (W_Fi + OuterDiameterFittingPVC(ND_FiBwTrunk) + 1.5*T_ConcreteMin - .5*T_PlantWall - 4*ElbowRadius(ND_FiManBranch));
        Fi_origin[2] + outerdiameter(ND_FiBwManBranch)/2 + 120 cm
    ], [0; 0; 180]*deg, ND_FiManBranch, EN_PipeSpec)
    Local5 ← PipeF([
        Fi_origin[0] + CouplingLength(ND_FiBwTrunk) - T_PlantWall - (L_Fi + SocketDepth(ND_FiTrunk)) - outerdiameter(ND_FiManBranch)/2 + (L_Fi + SocketDepth(ND_FiTrunk))/(2*N_FiManBranch);
        FiBwInletCoupling_origin[1] - outerdiameter(ND_FiTrunk)/2;
        Fi_origin[2] + outerdiameter(ND_FiBwManBranch)/2 + 120 cm
    ], W_Fi + OuterDiameterFittingPVC(ND_FiBwTrunk) + 1.5*T_ConcreteMin - .5*T_PlantWall - 4*ElbowRadius(ND_FiManBranch) - SocketDepth(ND_FiManBranch), [90; 0; 90]*deg, ND_FiManBranch, EN_PipeSpec)
    elbow2 ← ElbowF([
        Fi_origin[0] + CouplingLength(ND_FiBwTrunk) - T_PlantWall - (L_Fi + SocketDepth(ND_FiTrunk)) - outerdiameter(ND_FiManBranch)/2 + (L_Fi + SocketDepth(ND_FiTrunk))/(2*N_FiManBranch);
        FiBwInletCoupling_origin[1] - outerdiameter(ND_FiTrunk)/2 - (W_Fi + OuterDiameterFittingPVC(ND_FiBwTrunk) + 1.5*T_ConcreteMin - .5*T_PlantWall - 4*ElbowRadius(ND_FiManBranch));
        Fi_origin[2] + outerdiameter(ND_FiBwManBranch)/2 + 120 cm
    ], [180; 0; 0]*deg, ND_FiManBranch, EN_PipeSpec)
    return stack(Local, Local3, Local4, elbow1, Local5, elbow2)
frmanbranch := FreezeLayer("manifold branches")
mirrormanbranch := Mirror3dGroup("manifold branches", "y", [Fi_origin[0]; Fi_origin[1] - T_PlantWall; Fi_origin[2]], "n")
layernewpipe := layer_new("pipes", blue)
bwpipe := PipeF([
    Fi_origin[0] + CouplingLength(ND_FiBwTrunk) - SocketDepth(ND_FiBwTrunk);
    FiBwInletCoupling_origin[1];
    Fi_origin[2] + outerdiameter(ND_FiBwManBranch)/2
], W_MpWalkway + 2*T_PlantWall + L_FiExit + L_FiEntrance - T_ConcreteMin - ND_FiBwTrunk/2 - ElbowRadius(ND_FiBwTrunk), [0; 180]*deg, ND_FiBwTrunk, EN_PipeSpec)
pipe2 := PipeF([
    Fi_origin[0] + CouplingLength(ND_FiBwTrunk) - SocketDepth(ND_FiBwTrunk);
    FiBwInletCoupling_origin[1];
    Fi_origin[2] + outerdiameter(ND_FiBwManBranch)/2 + 20 cm
], W_MpWalkway + T_PlantWall + L_FiExit - T_ConcreteMin - ND_FiTrunk/2 - ElbowRadius(ND_FiTrunk), [0; 180]*deg, ND_FiTrunk, EN_PipeSpec)
pipe3 := PipeF([
    Fi_origin[0] + CouplingLength(ND_FiBwTrunk) - SocketDepth(ND_FiBwTrunk);
    FiBwInletCoupling_origin[1];
    Fi_origin[2] + outerdiameter(ND_FiBwManBranch)/2 + 40 cm
], W_MpWalkway + 2*T_PlantWall + L_FiExit + T_ConcreteMin + ND_FiTrunk/2 - ElbowRadius(ND_FiTrunk), [0; 180]*deg, ND_FiTrunk, EN_PipeSpec)
pipe4 := PipeF([
    Fi_origin[0] + CouplingLength(ND_FiBwTrunk) - SocketDepth(ND_FiBwTrunk);
    FiBwInletCoupling_origin[1];
    Fi_origin[2] + outerdiameter(ND_FiBwManBranch)/2 + 60 cm
], W_MpWalkway + T_PlantWall + L_FiExit - T_ConcreteMin - ND_FiTrunk/2 - ElbowRadius(ND_FiTrunk), [0; 180]*deg, ND_FiTrunk, EN_PipeSpec)
pipe5 := PipeF([
    Fi_origin[0] + CouplingLength(ND_FiBwTrunk) - SocketDepth(ND_FiBwTrunk);
    FiBwInletCoupling_origin[1];
    Fi_origin[2] + outerdiameter(ND_FiBwManBranch)/2 + 80 cm
], W_MpWalkway + T_PlantWall + T_ConcreteMin + ND_FiTrunk/2 - ElbowRadius(ND_FiTrunk), [0; 180]*deg, ND_FiTrunk, EN_PipeSpec)
pipe6 := PipeF([
    Fi_origin[0] + CouplingLength(ND_FiBwTrunk) - SocketDepth(ND_FiBwTrunk);
    FiBwInletCoupling_origin[1];
    Fi_origin[2] + outerdiameter(ND_FiBwManBranch)/2 + 100 cm
], W_MpWalkway + T_PlantWall + T_ConcreteMin + ND_FiTrunk/2 - ElbowRadius(ND_FiTrunk), [0; 180]*deg, ND_FiTrunk, EN_PipeSpec)
pipe7 := PipeF([
    Fi_origin[0] + CouplingLength(ND_FiBwTrunk) - SocketDepth(ND_FiBwTrunk);
    FiBwInletCoupling_origin[1];
    Fi_origin[2] + outerdiameter(ND_FiBwManBranch)/2 + 120 cm
], W_MpWalkway + T_PlantWall + T_ConcreteMin + ND_FiTrunk/2 - 2*ElbowRadius(ND_FiTrunk), [0; 180]*deg, ND_FiTrunk, EN_PipeSpec)
spipe1 := PipeF([
    Fi_origin[0] + CouplingLength(ND_FiSiphon) - SocketDepth(ND_FiSiphon);
    Fi_origin[1] + T_ConcreteMin + OuterDiameterFittingPVC(ND_FiSiphon)/2;
    Z_FiSiphonCoupling
], 2*SocketDepth(ND_FiSiphon), [0; 180]*deg, ND_FiSiphon, EN_PipeSpec)
selbow1 := ElbowF([
    Fi_origin[0] + CouplingLength(ND_FiSiphon) + ElbowRadius(ND_FiSiphon) + SocketDepth(ND_FiSiphon);
    Fi_origin[1] + T_ConcreteMin + OuterDiameterFittingPVC(ND_FiSiphon)/2;
    Z_FiSiphonCoupling - ElbowRadius(ND_FiSiphon)
], [0; 0; 90]*deg, ND_FiSiphon, EN_PipeSpec)
spipe2 := PipeF([
    Fi_origin[0] - SocketDepth(ND_FiSiphon);
    Fi_origin[1] + T_ConcreteMin + OuterDiameterFittingPVC(ND_FiSiphon)/2;
    Z_FiSiphonCoupling
], 2*SocketDepth(ND_FiSiphon), [180; 0]*deg, ND_FiSiphon, EN_PipeSpec)
selbow2 := TeeF([
    Fi_origin[0] - SocketDepth(ND_FiSiphon);
    Fi_origin[1] + T_ConcreteMin + OuterDiameterFittingPVC(ND_FiSiphon)/2;
    Z_FiSiphonCoupling
], [90; 0; 0]*deg, ND_FiSiphon, EN_PipeSpec)
CouplingLength(ND_FiSiphon) = 0.15875 m
SocketDepth(ND_FiSiphon) = 0.057 m
spipe12 := PipeF([
    Fi_origin[0] + CouplingLength(ND_FiSiphon) + ElbowRadius(ND_FiSiphon) + SocketDepth(ND_FiSiphon);
    Fi_origin[1] + T_ConcreteMin + OuterDiameterFittingPVC(ND_FiSiphon)/2;
    Z_FiSiphonCoupling - ElbowRadius(ND_FiSiphon)
], Z_FiBwBottom - ND_FiSiphon, [0; 90]*deg, ND_FiSiphon, EN_PipeSpec)
isiphonpipe := PipeF([
    Fi_origin[0] - ShortTeeLength(ND_FiSiphon);
    Fi_origin[1] + T_ConcreteMin + OuterDiameterFittingPVC(ND_FiSiphon)/2;
    Z_FiSiphonCoupling - 100 cm
], 50 cm, [0; 90]*deg, ND_FiSiphon, EN_PipeSpec)
TeeLength(ND_FiSiphon) = 0.28575 m
isiphonpipec := PipeF([
    Fi_origin[0] + SocketDepth(ND_FiSiphon);
    Fi_origin[1] + T_ConcreteMin + OuterDiameterFittingPVC(ND_FiSiphon)/2;
    Z_FiSiphonCoupling
], 2*SocketDepth(ND_FiSiphon), [0; 180]*deg, ND_FiSiphon, EN_PipeSpec)
isiphonpipe2 := PipeF([
    Fi_origin[0] - ShortTeeLength(ND_FiSiphon);
    Fi_origin[1] + T_ConcreteMin + OuterDiameterFittingPVC(ND_FiSiphon)/2;
    Z_FiSiphonCoupling + 100 cm
], 50 cm, [0; 270]*deg, ND_FiSiphon, EN_PipeSpec)
Z_FiSiphonCoupling + TeeLength(ND_FiSiphon)/2
dpipe := PipeF([
    Fi_origin[0] + 2*T_PlantWall + L_FiBw + L_FiBwWeirDrain/2;
    FiExitBox_origin[1] - 2*T_PlantWall;
    Z_FiBwWeirDrainBottom - CouplingLength(ND_FiBwWeirDrain) + SocketDepth(ND_FiBwWeirDrain)
], H_FiBw - H_FiBwWeirDrain, [0; 270]*deg, ND_FiBwWeirDrain, EN_PipeSpec)
dpipeelbow := ElbowF([
    Fi_origin[0] + 2*T_PlantWall + L_FiBw + L_FiBwWeirDrain/2 + ElbowRadius(ND_FiBwWeirDrain);
    FiExitBox_origin[1] - 2*T_PlantWall;
    Z_FiBwWeirDrainBottom - CouplingLength(ND_FiBwWeirDrain) + SocketDepth(ND_FiBwWeirDrain) - (H_FiBw - H_FiBwWeirDrain) - ElbowRadius(ND_FiBwWeirDrain)
], [90; 0; 270]*deg, ND_FiBwWeirDrain, EN_PipeSpec)
layerfreezepipe := FreezeLayer("pipes")
mirror3 := Mirror3dGroup("pipes", "y", [Fi_origin[0]; Fi_origin[1] - T_PlantWall; Fi_origin[2]], "n")
layerfreezefilt := FreezeLayer("SRSF filters")
mirror4 := Mirror3dGroup("SRSF filters", "y", [Fi_origin[0]; Fi_origin[1] - T_PlantWall; Fi_origin[2]], "n")
fiscript :=
    if N_Fi == 1
        one ← stack(layernewfilt, tankfilt, addbox, group3, layernewcouplings, bwcoupling1, coupling12, coupling13, coupling14, coupling15, coupling16, coupling17, siphonc1, layerfreezeco, layerman, man1, man2, man3, man4, man5, man6, man7)
        two ← stack(one, layerfrman, rotateman, layernewmbranches, man1script, man2script, man3script, man4script, man5script, man6script, man7script, frmanbranch, layernewpipe, bwpipe, pipe2, pipe3, pipe4, pipe5, pipe6, pipe7, spipe1, selbow1, spipe2, selbow2, spipe12, isiphonpipe, isiphonpipec, isiphonpipe2, dpipe, dpipeelbow, layerfreezepipe, bigunion, layerfreezefilt)
        return two
    if N_Fi ≥ 2
        three ← stack(layernewfilt, tankfilt, addbox, group3, layernewcouplings, bwcoupling1, coupling12, coupling13, coupling14, coupling15, coupling16, coupling17, siphonc1, layerset, layerfreezeco, mirror1, layerman, man1, man2, man3, man4, man5, man6, man7, layerset)
        four ← stack(three, layerfrman, rotateman, mirror2, layernewmbranches, man1script, man2script, man3script, man4script, man5script, man6script, man7script, frmanbranch, mirrormanbranch, layernewpipe, bwpipe, pipe2, pipe3, pipe4, pipe5, pipe6, pipe7, pipe7, spipe1, selbow1, spipe2, selbow2, spipe12, isiphonpipe, isiphonpipec, isiphonpipe2, dpipe, dpipeelbow, layerset, layerfreezepipe, mirror3, bigunion, layerfreezefilt, mirror4)
        return four
# Filter Control Box Script:
layernewcbox := layer_new("SRSFcontrolboxes", ltgrey)
tankebox := Tank(FiExitBox_origin, FiExitBox_dim, T_PlantWall)
tankibox := Tank(FiEntranceBox_origin, FiEntranceBox_dim, T_PlantWall)
group4 := FreezeLayer("SRSFcontrolboxes")
eweir := BoxF([FiEntranceBox_origin[0]; FiEntranceBox_origin[1] - T_PlantWall; FiEntranceWeir_origin[2]], [
    FiEntranceBox_origin[0] - L_FiWeir;
    FiEntranceBox_origin[1];
    FiEntranceBox_origin[2] + H_FiEntrance
], [0; 0; 0]*deg)
exitweir := BoxF([FiExitBox_origin[0]; FiEntranceBox_origin[1] - T_PlantWall; Z_FiExitWeir], [FiExitBox_origin[0] - L_FiWeir; FiEntranceBox_origin[1]; FiEntranceBox_origin[2] + H_FiExit], [0; 0; 0]*deg)
bwweir := BoxF([Fi_origin[0] + 2*T_PlantWall + L_FiBw; FiExitBox_origin[1] - 2*T_PlantWall - W_FiBw/2; Z_FiBwWeir], [
    Fi_origin[0] + T_PlantWall + L_FiBw;
    (FiExitBox_origin[1] - 2*T_PlantWall) + W_FiBw/2;
    Z_FiBwBottom + H_FiBw
], [0; 0; 0]*deg)
group5 := GroupAll("DeleteMe")
subtractweirs := SubtractF(["SRSFcontrolboxes"; "FilterBWDrainChannel"], "DeleteMe")
layernewcoup := layer_new("controlcouplings", green)
ecoupling0 := CouplingSUBF([FiExitCoupling0_origin[0]; FiBwInletCoupling_origin[1]; FiExitCoupling0_origin[2]], [0; 90]*deg, ND_FiTrunk, EN_PipeSpec, ["SRSFcontrolboxes"])
ecoupling1 := CouplingSUBF([FiExitCoupling1_origin[0]; FiBwInletCoupling_origin[1]; FiExitCoupling1_origin[2]], [0; 90]*deg, ND_FiTrunk, EN_PipeSpec, ["SRSFcontrolboxes"])
ecoupling2 := CouplingSUBF([FiExitCoupling0_origin[0]; FiExitCoupling2_origin[1]; FiExitCoupling2_origin[2]], [0; 90]*deg, ND_FiTrunk, EN_PipeSpec, ["SRSFcontrolboxes"])
ecoupling3 := CouplingSUBF([FiExitCoupling3_origin[0]; FiExitCoupling3_origin[1]; FiExitCoupling3_origin[2]], [0; 90]*deg, ND_FiTrunk, EN_PipeSpec, ["SRSFcontrolboxes"])
bwcoup1 := CouplingSUBF([FiBwInletCoupling_origin[0]; FiBwInletCoupling_origin[1]; FiBwInletCoupling_origin[2]], [0; 90]*deg, ND_FiBwTrunk, EN_PipeSpec, ["SRSFcontrolboxes"])
icoupling1 := CouplingSUBF([FiInletCoupling1_origin[0]; FiBwInletCoupling_origin[1]; FiInletCoupling1_origin[2]], [0; 90]*deg, ND_FiTrunk, EN_PipeSpec, ["SRSFcontrolboxes"])
icoupling2 := CouplingSUBF([
    FiInletCoupling2_origin[0];
    FiEntranceBox_origin[1] + 2*T_ConcreteMin + 1.5*ND_FiTrunk;
    FiInletCoupling2_origin[2]
], [0; 90]*deg, ND_FiTrunk, EN_PipeSpec, ["SRSFcontrolboxes"])
icoupling3 := CouplingSUBF([
    FiInletCoupling3_origin[0];
    FiEntranceBox_origin[1] + 2*T_ConcreteMin + 1.5*ND_FiTrunk;
    FiInletCoupling3_origin[2]
], [0; 90]*deg, ND_FiTrunk, EN_PipeSpec, ["SRSFcontrolboxes"])
layerfreezec := FreezeLayer("controlcouplings")
mirror5 := Mirror3dGroup("controlcouplings", "y", [Fi_origin[0]; Fi_origin[1] - T_PlantWall; Fi_origin[2]], "n")
layernewcpipes := layer_new("controlpipes", blue)
bwpipe1 := PipeF([FiBwInletCoupling_origin[0]; FiBwInletCoupling_origin[1]; FiBwInletCoupling_origin[2]], H_Fi - H_FiEntrance - ElbowRadius(ND_FiBwTrunk) - ND_FiBwTrunk/2 - SocketDepth(ND_FiBwTrunk), [0; 270]*deg, ND_FiBwTrunk, EN_PipeSpec)
bwelbow1 := ElbowF([
    FiBwInletCoupling_origin[0];
    FiBwInletCoupling_origin[1];
    Fi_origin[2] + outerdiameter(ND_FiBwManBranch)/2 + ElbowRadius(ND_FiBwTrunk)
], [0; 0; 270]*deg, ND_FiBwTrunk, EN_PipeSpec)
cpipe1 := PipeF([FiInletCoupling1_origin[0]; FiBwInletCoupling_origin[1]; FiInletCoupling1_origin[2]], H_Fi - H_FiEntrance - ElbowRadius(ND_FiTrunk) - ND_FiBwTrunk/2 - 40 cm - SocketDepth(ND_FiTrunk)/2, [0; 270]*deg, ND_FiTrunk, EN_PipeSpec)
elbow1 := ElbowF([
    FiInletCoupling1_origin[0];
    FiBwInletCoupling_origin[1];
    Fi_origin[2] + outerdiameter(ND_FiBwManBranch)/2 + 40 cm + ElbowRadius(ND_FiTrunk)
], [0; 0; 270]*deg, ND_FiTrunk, EN_PipeSpec)
cpipe2 := PipeF([
    FiInletCoupling2_origin[0];
    FiEntranceBox_origin[1] + 2*T_ConcreteMin + 1.5*ND_FiTrunk;
    FiInletCoupling2_origin[2]
], H_Fi - H_FiEntrance - 2*ElbowRadius(ND_FiTrunk) - ND_FiBwTrunk/2 - 60 cm - SocketDepth(ND_FiTrunk)/2, [0; 270]*deg, ND_FiTrunk, EN_PipeSpec)
elbow2 := ElbowF([
    FiExitCoupling1_origin[0];
    FiBwInletCoupling_origin[1] - ElbowRadius(ND_FiTrunk);
    Fi_origin[2] + outerdiameter(ND_FiBwManBranch)/2 + 80 cm
], [0; 0; 0]*deg, ND_FiTrunk, EN_PipeSpec)
pipe2a := PipeF([
    FiExitCoupling1_origin[0];
    FiBwInletCoupling_origin[1] - ElbowRadius(ND_FiTrunk);
    Fi_origin[2] + outerdiameter(ND_FiBwManBranch)/2 + 80 cm
], W_FiExit - 2*T_ConcreteMin - ND_FiTrunk - 3*ElbowRadius(ND_FiTrunk), [90; 0]*deg, ND_FiTrunk, EN_PipeSpec)
elbow2a := ElbowF([
    FiExitCoupling1_origin[0];
    FiBwInletCoupling_origin[1] + 2*ElbowRadius(ND_FiTrunk) - W_FiExit + 2*T_ConcreteMin + ND_FiTrunk;
    Fi_origin[2] + outerdiameter(ND_FiBwManBranch)/2 + 80 cm
], [180; 0; 0]*deg, ND_FiTrunk, EN_PipeSpec)
pipe2b := PipeF([
    FiInletCoupling2_origin[0] - ElbowRadius(ND_FiTrunk);
    FiEntranceBox_origin[1] + 2*T_ConcreteMin + 1.5*ND_FiTrunk;
    Fi_origin[2] + outerdiameter(ND_FiBwManBranch)/2 + 80 cm
], 2*L_FiExit - 2*T_ConcreteMin - ND_FiTrunk - ElbowRadius(ND_FiTrunk) - 2*SocketDepth(ND_FiTrunk), [0; 0]*deg, ND_FiTrunk, EN_PipeSpec)
elbow2b := ElbowF([
    FiInletCoupling2_origin[0] - ElbowRadius(ND_FiTrunk);
    FiEntranceBox_origin[1] + 2*T_ConcreteMin + 1.5*ND_FiTrunk;
    Fi_origin[2] + outerdiameter(ND_FiBwManBranch)/2 + 80 cm
], [90; 180; 270]*deg, ND_FiTrunk, EN_PipeSpec)
cpipe3 := PipeF([
    FiInletCoupling3_origin[0];
    FiEntranceBox_origin[1] + 2*T_ConcreteMin + 1.5*ND_FiTrunk;
    FiInletCoupling3_origin[2]
], H_Fi - H_FiEntrance - 3*ElbowRadius(ND_FiTrunk) - ND_FiBwTrunk/2 - 80 cm - SocketDepth(ND_FiTrunk)/2 + SocketDepth(ND_FiTrunk), [0; 270]*deg, ND_FiTrunk, EN_PipeSpec)
elbow3 := ElbowF([
    FiExitCoupling1_origin[0] - ElbowRadius(ND_FiTrunk);
    FiBwInletCoupling_origin[1] - ElbowRadius(ND_FiTrunk);
    Fi_origin[2] + outerdiameter(ND_FiBwManBranch)/2 + 120 cm
], [0; 0; 0]*deg, ND_FiTrunk, EN_PipeSpec)
pipe3a := PipeF([
    FiExitCoupling1_origin[0] - ElbowRadius(ND_FiTrunk);
    FiBwInletCoupling_origin[1] - ElbowRadius(ND_FiTrunk);
    Fi_origin[2] + outerdiameter(ND_FiBwManBranch)/2 + 120 cm
], W_FiExit - 2*T_ConcreteMin - ND_FiTrunk - 3*ElbowRadius(ND_FiTrunk), [90; 0]*deg, ND_FiTrunk, EN_PipeSpec)
elbow3a := ElbowF([
    FiExitCoupling1_origin[0] - ElbowRadius(ND_FiTrunk);
    FiBwInletCoupling_origin[1] + 2*ElbowRadius(ND_FiTrunk) - W_FiExit + 2*T_ConcreteMin + ND_FiTrunk;
    Fi_origin[2] + outerdiameter(ND_FiBwManBranch)/2 + 120 cm
], [180; 0; 0]*deg, ND_FiTrunk, EN_PipeSpec)
pipe3b := PipeF([
    FiInletCoupling3_origin[0] - ElbowRadius(ND_FiTrunk);
    FiEntranceBox_origin[1] + 2*T_ConcreteMin + 1.5*ND_FiTrunk;
    Fi_origin[2] + outerdiameter(ND_FiBwManBranch)/2 + 120 cm
], 2*L_FiExit - 2*T_ConcreteMin - ND_FiTrunk - ElbowRadius(ND_FiTrunk) - 3*SocketDepth(ND_FiTrunk), [0; 0]*deg, ND_FiTrunk, EN_PipeSpec)
elbow3b := ElbowF([
    FiInletCoupling3_origin[0] - ElbowRadius(ND_FiTrunk);
    FiEntranceBox_origin[1] + 2*T_ConcreteMin + 1.5*ND_FiTrunk;
    Fi_origin[2] + outerdiameter(ND_FiBwManBranch)/2 + 120 cm
], [90; 180; 270]*deg, ND_FiTrunk, EN_PipeSpec)
epipe1 := PipeF([FiExitCoupling0_origin[0]; FiBwInletCoupling_origin[1]; FiExitCoupling0_origin[2]], H_Fi - H_FiEntrance - ElbowRadius(ND_FiTrunk) - ND_FiBwTrunk/2 - 60 cm - SocketDepth(ND_FiTrunk)/2, [0; 270]*deg, ND_FiTrunk, EN_PipeSpec)
eelbow1 := ElbowF([
    FiExitCoupling0_origin[0];
    FiBwInletCoupling_origin[1];
    Fi_origin[2] + outerdiameter(ND_FiBwManBranch)/2 + 60 cm + ElbowRadius(ND_FiTrunk)
], [0; 0; 270]*deg, ND_FiTrunk, EN_PipeSpec)
epipe2 := PipeF([FiExitCoupling1_origin[0]; FiBwInletCoupling_origin[1]; FiExitCoupling1_origin[2]], H_Fi - H_FiEntrance - ElbowRadius(ND_FiTrunk) - ND_FiBwTrunk/2 - 100 cm - SocketDepth(ND_FiTrunk)/2, [0; 270]*deg, ND_FiTrunk, EN_PipeSpec)
eelbow2 := ElbowF([
    FiExitCoupling1_origin[0];
    FiBwInletCoupling_origin[1];
    Fi_origin[2] + outerdiameter(ND_FiBwManBranch)/2 + 100 cm + ElbowRadius(ND_FiTrunk)
], [0; 0; 270]*deg, ND_FiTrunk, EN_PipeSpec)
epipe3 := PipeF([FiExitCoupling0_origin[0]; FiExitCoupling2_origin[1]; FiExitCoupling2_origin[2]], H_Fi - H_FiEntrance - ElbowRadius(ND_FiTrunk) - ND_FiBwTrunk/2 - 20 cm - SocketDepth(ND_FiTrunk)/2, [0; 270]*deg, ND_FiTrunk, EN_PipeSpec)
eelbow3 := ElbowF([
    FiExitCoupling3_origin[0];
    FiExitCoupling3_origin[1];
    FiExitCoupling3_origin[2] - 2*SocketDepth(ND_FiTrunk)
], [180; 225; 90]*deg, ND_FiTrunk, EN_PipeSpec)
[180; 270; 90]
delbow1 := ElbowF([
    FiExitCoupling3_origin[0] - ElbowRadius(ND_FiTrunk);
    FiExitCoupling3_origin[1] - ElbowRadius(ND_FiTrunk);
    FiExitCoupling3_origin[2] - 2*SocketDepth(ND_FiTrunk) - ElbowRadius(ND_FiTrunk)
], [90; 45; 90]*deg, ND_FiTrunk, EN_PipeSpec)
dpipebw := PipeF([
    FiExitCoupling3_origin[0] - ElbowRadius(ND_FiTrunk);
    FiExitCoupling3_origin[1] - ElbowRadius(ND_FiTrunk);
    FiExitCoupling3_origin[2] - 2*SocketDepth(ND_FiTrunk) - ElbowRadius(ND_FiTrunk)
], 50 cm, [90; 45; 90]*deg, ND_FiTrunk, EN_PipeSpec)
epipe4 := epipe4 ← PipeF([FiExitCoupling3_origin[0]; FiExitCoupling3_origin[1]; FiExitCoupling3_origin[2]], 2*SocketDepth(ND_FiTrunk), [0; 270]*deg, ND_FiTrunk, EN_PipeSpec)
eelbow4 := ElbowF([
    FiExitCoupling0_origin[0];
    FiBwInletCoupling_origin[1] - ElbowRadius(ND_FiTrunk);
    Fi_origin[2] + outerdiameter(ND_FiBwManBranch)/2 + 20 cm
], [0; 0; 0]*deg, ND_FiTrunk, EN_PipeSpec)
epipe4a := PipeF([
    FiExitCoupling0_origin[0];
    FiBwInletCoupling_origin[1] - ElbowRadius(ND_FiTrunk);
    Fi_origin[2] + outerdiameter(ND_FiBwManBranch)/2 + 20 cm
], W_FiExit - 2*T_ConcreteMin - ND_FiTrunk - 2*ElbowRadius(ND_FiTrunk) - SocketDepth(ND_FiTrunk), [90; 0]*deg, ND_FiTrunk, EN_PipeSpec)
eelbow4a := ElbowF([
    FiExitCoupling0_origin[0];
    FiExitCoupling3_origin[1] + ElbowRadius(ND_FiTrunk);
    Fi_origin[2] + outerdiameter(ND_FiBwManBranch)/2 + 20 cm
], [180; 270; 0]*deg, ND_FiTrunk, EN_PipeSpec)
layerfrpipe := FreezeLayer("controlpipes")
mirror6 := Mirror3dGroup("controlpipes", "y", [Fi_origin[0]; Fi_origin[1] - T_PlantWall; Fi_origin[2]], "n")
layerfreezecboxes := FreezeLayer("SRSFcontrolboxes")
mirror7 := Mirror3dGroup("SRSF controlboxes", "y", [Fi_origin[0]; Fi_origin[1] - T_PlantWall; Fi_origin[2]], "n")
ficontrolboxscript :=
    if N_Fi == 1
        one ← stack(layernewcbox, tankebox, tankibox, group4, eweir, exitweir, bwweir, group5, subtractweirs, layernewcoup, ecoupling0, ecoupling1, ecoupling2, ecoupling3, bwcoup1, icoupling1, icoupling2, icoupling3, layerset, layerfreezec, layernewcpipes, bwpipe1, bwelbow1, cpipe1, elbow1, cpipe2, elbow2, pipe2a, elbow2a, pipe2b, elbow2b, cpipe3, elbow3, pipe3a, elbow3a, pipe3b, elbow3b, epipe1)
        two ← stack(one, eelbow1, epipe2, eelbow2, epipe3, eelbow3, delbow1, epipe4, eelbow4, epipe4a, eelbow4a, layerset, layerfrpipe, bigunion, layerfreezecboxes)
        return two
    if N_Fi ≥ 2
        three ← stack(layernewcbox, tankebox, tankibox, group4, eweir, exitweir, bwweir, group5, subtractweirs, layernewcoup, ecoupling0, ecoupling1, ecoupling2, ecoupling3, bwcoup1, icoupling1, icoupling2, icoupling3, layerset, layerfreezec, mirror5, layernewcpipes, bwpipe1, bwelbow1, cpipe1, elbow1, cpipe2, elbow2, pipe2a, elbow2a, pipe2b, elbow2b, cpipe3, elbow3, pipe3a, elbow3a, pipe3b, elbow3b, epipe1, eelbow1)
        four ← stack(three, epipe2, eelbow2, epipe3, eelbow3, delbow1, epipe4, eelbow4, epipe4a, eelbow4a, layerset, layerfrpipe, mirror6, bigunion, layerfreezecboxes, mirror7)
        return four
# Filter Drain Channel Script:
layerfid := layer_new("FilterBWDrainChannel", ltgrey)
bwbox := stack(Tank([Fi_origin[0] + T_PlantWall + L_FiBw; FiExitBox_origin[1] - 2*T_PlantWall - W_FiBw/2; Z_FiBwBottom], [L_FiBw; W_FiBw; H_FiBw], T_PlantWall), "")
bwdrainbox := stack(Tank([
    Fi_origin[0] + 2*T_PlantWall + L_FiBw + L_FiBwWeirDrain;
    FiExitBox_origin[1] - 2*T_PlantWall - W_FiBwWeirDrain/2;
    Z_FiBwWeirDrainBottom
], [L_FiBwWeirDrain; W_FiBwWeirDrain; H_FiBwWeirDrain], T_PlantWall), "")
ioverflowtank := Tank([FiEntranceBox_origin[0]; FiEntranceBox_origin[1] - T_PlantWall - W_FiOverflow; Z_FiOverflowBottom], [L_FiOverflow; W_FiOverflow; H_FiOverflow], T_PlantWall)
eoverflowtank := Tank([FiExitBox_origin[0]; FiEntranceBox_origin[1] - T_PlantWall - W_FiOverflow; Z_FiOverflowBottom], [L_FiOverflow; W_FiOverflow; H_FiExit], T_PlantWall)
connectbox := BoxF([
    FiExitBox_origin[0] - T_PlantWall;
    FiExitBox_origin[1] - T_PlantWall - W_FiOverflow;
    FiExitBox_origin[2]
], [FiExitBox_origin[0]; FiExitBox_origin[1] - T_PlantWall; FiExitBox_origin[2] + H_FiEntrance], [0; 0; 0]*deg)
channel2 := ChannelDrawing([
    Fi_origin[0] + T_PlantWall + L_FiBw/2 - outerdiameter(ND_DistPipe)/2 - 5 cm;
    FiExitBox_origin[1] - (2*T_PlantWall) - .5*H_FiBwDrain/2;
    Z_FiBwBottom - H_FiBwDrain - T_PlantWall
], [
    L_FiEntrance + W_ExitChannel + 4*T_PlantWall + L_FiExit + W_MpWalkway - outerdiameter(ND_DistPipe)/2 - 5 cm;
    .5*H_FiBwDrain;
    H_FiBwDrain
], T_ChannelWall)
group6 := FreezeLayer("FilterBWDrainChannel")
layernewcoups := layer_new("couplings", green)
overflowcoupling := CouplingSUBF([
    FiExitBox_origin[0] + (T_PlantWall + CouplingLength(ND_DistPipe))/2 - SocketDepth(ND_DistPipe);
    FiExitBox_origin[1] - T_PlantWall - W_FiOverflow/2;
    Z_FiOverflowBottom - T_ConcreteMin - 0.5*ND_DistPipe + H_FiEntrance
], [0; 0]*deg, ND_DistPipe, EN_PipeSpec, ["FilterBWDrainChannel"])
eoverflowcoupling := CouplingSUBF([
    FiExitBox_origin[0] - L_FiExit/2;
    FiExitBox_origin[1] - T_PlantWall - W_FiOverflow/2;
    Z_FiOverflowBottom - CouplingLength(ND_DistPipe) + SocketDepth(ND_DistPipe)
], [0; 90]*deg, ND_DistPipe, EN_PipeSpec, ["FilterBWDrainChannel"])
overflowelbow := ElbowF([
    FiExitBox_origin[0] - SocketDepth(ND_DistPipe);
    FiExitBox_origin[1] - T_PlantWall - W_FiOverflow/2;
    Z_FiOverflowBottom - T_ConcreteMin - 0.5*ND_DistPipe + H_FiEntrance
], [90; 0; 90]*deg, ND_DistPipe, EN_PipeSpec)
ofconpipe := PipeF([
    FiExitBox_origin[0] + (T_PlantWall + CouplingLength(ND_DistPipe))/2 - SocketDepth(ND_DistPipe);
    FiExitBox_origin[1] - T_PlantWall - W_FiOverflow/2;
    Z_FiOverflowBottom - T_ConcreteMin - 0.5*ND_DistPipe + H_FiEntrance
], 2*SocketDepth(ND_DistPipe), [0; 0]*deg, ND_DistPipe, EN_PipeSpec)
2*SocketDepth(ND_DistPipe) = 0.114 m
ofconpipe2 := PipeF([
    FiExitBox_origin[0] - ElbowRadius(ND_DistPipe) - SocketDepth(ND_DistPipe);
    FiExitBox_origin[1] - T_PlantWall - W_FiOverflow/2;
    Z_FiOverflowBottom - T_ConcreteMin - 0.5*ND_DistPipe + H_FiEntrance - ElbowRadius(ND_DistPipe)
], H_FiExit + SocketDepth(ND_DistPipe), [0; 270]*deg, ND_DistPipe, EN_PipeSpec)
H_FiExit = 0.228009 m
H_FiExit - Z_FiExitWeir = -0.685247 m
distpipe := PipeF([
    FiExitBox_origin[0] - L_FiExit/2;
    FiExitBox_origin[1] - T_PlantWall - W_FiOverflow/2;
    Z_FiOverflowBottom - CouplingLength(ND_DistPipe) - SocketDepth(ND_DistPipe)
], 2*SocketDepth(ND_DistPipe), [0; 90]*deg, ND_DistPipe, EN_PipeSpec)
distelbow := ElbowF([
    FiExitBox_origin[0] - L_FiExit/2;
    FiExitBox_origin[1] - T_PlantWall - W_FiOverflow/2 - ElbowRadius(ND_DistPipe);
    Z_FiOverflowBottom - CouplingLength(ND_DistPipe) - ElbowRadius(ND_DistPipe) - SocketDepth(ND_DistPipe)
], [0; 90; 0]*deg, ND_DistPipe, EN_PipeSpec)
distpipe2 := PipeF([
    FiExitBox_origin[0] - L_FiExit/2;
    FiExitBox_origin[1] - T_PlantWall - W_FiOverflow/2 - ElbowRadius(ND_DistPipe);
    (Z_FiOverflowBottom - CouplingLength(ND_DistPipe)) - SocketDepth(ND_DistPipe) - ElbowRadius(ND_DistPipe)
], 50 cm, [90; 0]*deg, ND_FiTrunk, EN_PipeSpec)
ioverflowcoupling := CouplingSUBF([
    FiEntranceBox_origin[0] - T_ConcreteMin - 0.5*ND_DistPipe;
    FiExitBox_origin[1] - T_PlantWall - W_FiOverflow/2;
    (Z_FiOverflowBottom - CouplingLength(ND_FiEntranceOverflow)) + SocketDepth(ND_FiEntranceOverflow)
], [0; 90]*deg, ND_FiEntranceOverflow, EN_PipeSpec, ["FilterBWDrainChannel"])
Z_FiOverflowBottom - CouplingLength(ND_FiEntranceOverflow) + SocketDepth(ND_FiEntranceOverflow) = 0.781605 m  # NO
Z_FiOverflowBottom - CouplingLength(ND_FiEntranceOverflow) = 0.735605 m  # NO
Z_FiOverflowBottom - CouplingLength(ND_DistPipe) + SocketDepth(ND_DistPipe)  # NO
drainpipe := PipeF([
    FiEntranceBox_origin[0] - T_ConcreteMin - 0.5*ND_DistPipe;
    FiExitBox_origin[1] - T_PlantWall - W_FiOverflow/2;
    Z_FiOverflowBottom - CouplingLength(ND_FiEntranceOverflow) + SocketDepth(ND_FiEntranceOverflow)
], H_Fi - H_FiEntrance - SocketDepth(ND_FiEntranceOverflow), [0; 270]*deg, ND_FiEntranceOverflow, EN_PipeSpec)
drainelbow := ElbowF([
    FiEntranceBox_origin[0] - T_ConcreteMin - 0.5*ND_DistPipe + ElbowRadius(ND_FiEntranceOverflow);
    FiExitBox_origin[1] - T_PlantWall - W_FiOverflow/2;
    Z_FiOverflowBottom - CouplingLength(ND_FiEntranceOverflow) + SocketDepth(ND_FiEntranceOverflow) - (H_Fi - H_FiEntrance) - ElbowRadius(ND_FiEntranceOverflow)
], [90; 0; 270]*deg, ND_FiEntranceOverflow, EN_PipeSpec)
bwdraincoupling := CouplingSUBF([
    Fi_origin[0] + 2*T_PlantWall + L_FiBw + L_FiBwWeirDrain/2;
    FiExitBox_origin[1] - 2*T_PlantWall;
    Z_FiBwWeirDrainBottom - CouplingLength(ND_FiBwWeirDrain) + SocketDepth(ND_FiBwWeirDrain)
], [0; 90]*deg, ND_FiBwWeirDrain, EN_PipeSpec, ["FilterBWDrainChannel"])
bwcoupling := CouplingSUBF([
    Fi_origin[0] + T_PlantWall + L_FiBw/2;
    FiExitBox_origin[1] - 2*T_PlantWall;
    Z_FiBwBottom - CouplingLength(ND_FiBwDrain) + SocketDepth(ND_FiBwDrain)
], [0; 90]*deg, ND_FiBwDrain, EN_PipeSpec, ["FilterBWDrainChannel"])
layerfreezecoup := FreezeLayer("couplings")
layerfreeze3 := FreezeLayer("FilterBWDrainChannel")
fidrainscript := stack(layerfid, bwbox, bwdrainbox, ioverflowtank, eoverflowtank, connectbox, channel2, group6, layernewcoups, overflowcoupling, eoverflowcoupling, overflowelbow, ofconpipe, ofconpipe2, distpipe, distelbow, distpipe2, ioverflowcoupling, drainpipe, drainelbow, bwdraincoupling, bwcoupling, layerset, layerfreezecoup, bigunion, layerfreeze3)
AC_Filter := stack(fidrainscript, filterscript, fiscript, ficontrolboxscript)
# [component: inputs AC_Filter]
