# Space to add references...
Lang := stringit_nounits(Language)
SetLayout(Layout) := concat("layout", sp, "s", sp, Layout)
CreateLayout(LayoutName) := concat("-layout ", "n ", LayoutName, sp)
LoadTemplate := stack(concat("-layout", sp, "ba", sp, "AguaClara", sp, Lang), "View")
ZoomView := concat("z", sp, "o", sp, "all", sp)
Zoom := concat("zoom", sp, "1/2XP")
RenameBackview := RenameLayout("View", "BackView")
SetBackview := SetLayout("BackView")
RenameLayout(Original, New) := stack(concat("layout", sp, "r", sp, Original), New)
BackViewPlant := stack(LoadTemplate, RenameBackview, SetBackview, ".ms", view("ba"), ZoomView, Zoom, "model")
LoadTemplate := stack(concat("-layout", sp, "ba", sp, "AguaClara", sp, Lang), "View")
LoadTop := stack("-view", "o", "t")
RenameFrontview := RenameLayout("View", "FrontView")
RenameBackview := RenameLayout("View", "BackView")
RenameTopview := RenameLayout("View", "TopView")
SetBackview := SetLayout("Backview")
SetTopview := SetLayout("Topview")
SetFrontview := SetLayout("FrontView")
FrontViewPlant := stack(LoadTemplate, RenameFrontview, SetFrontview, ".ms", view("f"), ZoomView, Zoom, "model")
ZoomView := concat("z", sp, "o", sp, "all", sp)
Zoom := concat("zoom", sp, "1/2XP")
RenameLeftview := RenameLayout("View", "LeftView")
BackViewPlant := stack(LoadTemplate, RenameBackview, SetBackview, ".ms", view("ba"), ZoomView, Zoom, "model")
SetLeftview := SetLayout("LeftView")
LeftViewPlant := stack(LoadTemplate, RenameLeftview, SetLeftview, ".ms", view("l"), ZoomView, Zoom, "model")
TopViewPlant := stack(LoadTop, ".ms", view("t"), ZoomView, Zoom)
RenameRightview := RenameLayout("View", "RightView")
MakeTopView := stack("-view", "o", "t")
SetRightview := SetLayout("RightView")
RightViewPlant := stack(LoadTemplate, RenameRightview, SetRightview, ".ms", view("ri"), ZoomView, Zoom, "model")
# L is 1 and T is 0.
# Dir is 1 or 0 for forward or backward (based on which edge the plane is closer to)
# name is in "quotes" and is the bit of the layer that should stay active!
OnlyLayer(name) := stack("-layer", "off", concat("~", name, "*"), "n", Enter)
# The basic version:
SectionCut(Point1, Point2, LorT, Dir, SectionName, Point3, Angle1, Angle2) :=
    DrawSection ← concat("Sectionplane", sp, "D")
    forward ← 1 if Dir == 1
    forward ← -1 otherwise
    LT ← [0 m; .02 m*forward; 0 m] if LorT == 1
    LT ← [.02 m*forward; 0 m; 0 m] otherwise
    Direction ← point(Point2 + LT/2)
    SectionPlanetoBlock ← concat("SPTB", sp, "last", Enter)
    InsertionPoint ← stack(point(Point3), "1", "1", 0)
    return stack(DrawSection, point(Point1), point(Point2), Enter, Direction, SectionPlanetoBlock, InsertionPoint)
SectionCutViews(Point1, Point2, Direction, SectionName, Point3, Angle1, Angle2, View) :=
    SwitchSpace ← concat("layout", sp, "s", sp, "model", sp)
    FreezeAll ← FreezeLayer("*")
    SectionLayer ← layer_new(SectionName, blue)
    DrawSection ← concat("Sectionplane", sp, "D")
    Direction ← concat(point(Direction))
    Thaw ← concat("laythw")
    SelectSection ← concat("Select", sp, "L")
    SectionPlanetoBlock ← concat("SPTB", sp, "last", Enter)
    Rotation ← stringit_nounits(Angle1/deg)
    InsertionPoint ← stack(point(Point3), "1", "1", Rotation)
    LayerOff ← LayerOff(SectionName)
    Flip ← stack("Rotate3D", "L", Enter, "y", "0,0,0", stringit_nounits(Angle2/deg))
    Layout ← stack(CreateLayout(SectionName), SetLayout(SectionName), VPortErase([0; 0]*m, [1000; 1000]*m), VPortNew([.013 m + Point1[0]; .013 m + Point1[1]], [.013 m + Point2[0]; .013 m + Point2[1]]), ChangeView([Point1[0]; Point1[2]], [Point2[0]; Point2[2]])) if View == "BackView"
    Layout ← stack(CreateLayout(SectionName), SetLayout(SectionName), VPortErase([0; 0]*m, [1000; 1000]*m), ChangeView([Point1[0]; Point1[2]], [Point2[0]; Point2[2]])) if View == "BackView"
    Layout ← stack(CreateLayout(SectionName), SetLayout(SectionName), VPortErase([0; 0]*m, [1000; 1000]*m), ChangeView([Point1[0]; Point1[2]], [Point2[0]; Point2[2]])) if View == "BackView"
    Layout ← stack(CreateLayout(SectionName), SetLayout(SectionName), VPortErase([0; 0]*m, [1000; 1000]*m), ChangeView([Point1[0]; Point1[2]], [Point2[0]; Point2[2]])) if View == "BackView"
    return stack(SwitchSpace, FreezeAll, SectionLayer, DrawSection, point(Point1), point(Point2), Enter, Direction, Thaw, SelectSection, sp, SectionPlanetoBlock, InsertionPoint, LayerOff, Flip, Layout)
SectionCutT(Point1, Point2, Direction, SectionName, Point3, Angle1, Angle2) :=
    SwitchSpace ← concat("layout", sp, "s", sp, "model", sp)
    FreezeAll ← FreezeLayer("*")
    SectionLayer ← layer_new(SectionName, blue)
    DrawSection ← concat("Sectionplane", sp, "D")
    Direction ← concat(point(Direction))
    Thaw ← concat("laythw")
    SelectSection ← concat("Select", sp, "L")
    SectionPlanetoBlock ← concat("SPTB", sp, "last", Enter)
    Rotation ← stringit_nounits(Angle1/deg)
    InsertionPoint ← stack(point(Point3), "1", "1", Rotation)
    LayerOff ← LayerOff(SectionName)
    Flip ← stack("Rotate3D", "L", Enter, "y", "0,0,0", stringit_nounits(Angle2/deg))
    Layout ← stack(CreateLayout(SectionName), SetLayout(SectionName), VPortErase([0; 0]*m, [1000; 1000]*m), VPortNew([Point3[0]; Point3[1]], [Point3[0] + Point2[0] - Point1[0]; Point3[1] + Point2[1] - Point1[1]]), ChangeView([0; 0]*m, [(Point2 - Point1)[0]; (Point2 - Point1)[1]]))
    return stack(FreezeAll, SectionLayer, DrawSection, Point1, Point2, Enter, Direction, Thaw, SelectSection, sp, SectionPlanetoBlock, InsertionPoint, LayerOff, Flip, Layout, SwitchSpace)
plantspace1 := [Plant_Origin[0] + 2*T_PlantWall; Plant_Origin[1] - 2*T_PlantWall; Plant_Origin[2] - H_Fi]
plantspace2 := [
    Plant_Origin[0] - 2*L_Sed;
    Plant_Origin[1] + 2*N_FlocChannels*W_Floc + 2*N_SedTanks*W_Sed;
    Plant_Origin[2] + H_Fi
]
up_z := [0; 0; H_Fi]
down_z := [0; 0; -H_Fi]
spacer_x := [2*L_Sed + T_PlantWall; 0; 0]
spacer_y := [0; 2*N_FlocChannels*W_Floc + 2*N_SedTanks*W_Sed + T_PlantWall; 0]
amt := .02 m
tiny_x := [amt; 0; 0]
tiny_y := [0; amt; 0]  # Only one slice ALSO conceptual mode.
out_x := [1 m; 0; 0]
# L is 1 and T is 0
Conslice(point1, point2, LorT, insertPoint) :=
    LT ← tiny_y if LorT == 1
    LT ← tiny_x otherwise
    slice1 ← stack("slice", point(point1), point(point2), Enter, □)
    return stack(slice1)  # error: This placeholder is empty.
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# New information about sectionplanes:
# Use the ortho option. Pick the slice option.
ungroup := stack("ungroup", "all", "y")
layer_other(name) := stack("-layer", "n", name, Enter)
MakeLayers_start := stack("-layer", "n", "long1,long2,trans1,trans2,trans3", Enter)
disp_1 := [-50 m; -50 m; 0 m]
Copy_Trans1 := stack("-copytolayer", "all", Enter, "trans1", "0,0,0", point(disp_1))
degrees := 90
rotatecopy_Trans1 := stack(layer_freeze("*"), SelectLayer("trans1"), "rotate3d", "all", Enter, "z", point(disp_1), degrees)
# simple 3D rotation matrix about z axis
disp_2 := [-100 m; -50 m; 0 m]
disp_3 := [-150 m; -50 m; 0 m]
rotatepoint_z(degrees) := [cos(degrees*π/180), -sin(degrees*π/180), 0; sin(degrees*π/180), cos(degrees*π/180), 0; 0, 0, 1]
spin_matrix := rotatepoint_z(degrees) = [0, -1, 0; 1, 0, 0; 0, 0, 1]
Copy_Trans2 := stack(layer_freeze("*"), SelectLayer("trans1"), "-copytolayer", "all", Enter, "trans2", "0,0,0", point(disp_2))
Copy_Trans3 := stack(layer_freeze("*"), SelectLayer("trans2"), "-copytolayer", "all", Enter, "trans3", "0,0,0", point(disp_3))
half_1 := [Plant_Origin[0] - L_Sed - W_HumanMin; Plant_Origin[1] - T_FiWall; Plant_Origin[2] - H_Fi]
half_2 := [
    Plant_Origin[0] - L_Sed - W_HumanMin;
    Plant_Origin[1] + N_FlocChannels*W_Floc + N_SedTanks*W_Sed + L_ChemPlatform + (N_FlocChannels + N_SedTanks + 2)*T_PlantWall;
    Plant_Origin[2] + H_Sed + H_Fi
]
SliceCopy2 := stack(layer_freeze("*"), SelectLayer("trans2"), ungroup, "slice", point(disp_2 + spin_matrix*half_1), point(disp_2 + spin_matrix*half_2), Enter, "0,0,0")
SliceCopy3 := stack(layer_freeze("*"), SelectLayer("trans3"), ungroup, "slice", point(disp_3 + spin_matrix*half_1), point(disp_3 + spin_matrix*half_2), Enter, "-200,0,0")
# LONGITUDINAL
# The Longitudinal cuts are contained within this area. Each cut is explained and defined.
# 1) Just above the entrance tank upper wall (outside of the plant) - looking downward (negative y direction) inwards into the plant
Long11 := [Plant_Origin[0]; SedLaunderPipe_Origin[1]; Plant_Origin[2]]
# These two points have the same y and z coordinates, but different x coordinates.
Fi_origin =  # error: This variable is undefined.
Long12 := [
    Plant_Origin[0] + Fi_origin[0] - L_Fi - T_FiWall - 30 cm;
    SedLaunderPipe_Origin[1];
    Plant_Origin[2]
]
# One fix may be a section cut of something that is already a section: If the plant is cut in the desired place, it can be viewed from just inside of that and still show only a thin sliver of the plant.
# Make the direction of view the opposite!
Angle11 := 0 deg
InsertionPoint1L := [20 m; Plant_Origin[1]; Plant_Origin[2]]
Angle12 := 0.0001 deg
SectCut1L := stack(layer_freeze("*"), SelectLayer("long1"), SectionCut(Long11, Long12, 1, 0, "Longitudinal One", InsertionPoint1L, Angle11, Angle12))
# 2) Entrance tank (through the center of the drainage pipes) - looking upward (positive y direction)
Long21 := [Plant_Origin[0]; LFOM_Origin[1]; Plant_Origin[2]]
LFOM_Origin =  # error
Long22 := [Plant_Origin[0] + Fi_origin[0] - L_Fi - T_FiWall - 30 cm; LFOM_Origin[1]; Plant_Origin[2]]
Angle21 := 0 deg
InsertionPoint2L := [2*20*m; Plant_Origin[1]; Plant_Origin[2]]
Angle22 := 180 deg
SectCut2L := stack(SectionCut(Long21, Long22, 1, 1, "Longitudinal Two", InsertionPoint2L, Angle21, Angle22), layer_freeze("*"))
SectionCutSpin(p1, p2, LorT, Dir, Name, InsertPt, Ang1, Ang2, disp, spin) := SectionCut(spin*p1 + disp, spin*p2 + disp, 1, Dir, Name, InsertPt, Ang1, Ang2)
# Assume that this is always for transversal cuts converted to L cuts
# The Transversal cuts are contained within this area. Each cut is explained and defined.
# TRANSVERSAL
copyLeft := stack("copy", point([
    Plant_Origin[0] - L_Floc - (2*T_PlantWall) - .5*W_HumanMin;
    Plant_Origin[1] - 2*T_PlantWall;
    Plant_Origin[2]
]), point(plantspace2), Enter, point(plantspace1), point([Plant_Origin[0]; Plant_Origin[1] + 20 m; Plant_Origin[2]]), Enter)
copyRight := stack("copy", point(plantspace2), point([
    Plant_Origin[0] - L_Floc - (2*T_PlantWall);
    Plant_Origin[1] + 2*N_FlocChannels*W_Floc + 2*N_SedTanks*W_Sed;
    Plant_Origin[2]
]), Enter, point(plantspace1), point([Plant_Origin[0]; Plant_Origin[1] + 40 m; Plant_Origin[2]]), Enter)
W_Trans1 := Plant_Origin[1] + N_FlocChannels*W_Floc + N_SedTanks*W_Sed + L_ChemPlatform + (N_FlocChannels + N_SedTanks + 2)*T_PlantWall = 13.3729 m
# 1) through sed tanks and floc tanks
Trans11 := [Plant_Origin[0] - S_FlocBaffle; Plant_Origin[1] - T_PlantWall; Plant_Origin[2]]
# These have the same x and z coordinates, but different y coordinates.
Et_Origin[1] + 2*T_PlantWall + W_Et + L_ChemPlatform =  # error
W_ChemPlatform =  # error
Trans12 := [Plant_Origin[0] - S_FlocBaffle; W_Trans1; Plant_Origin[2]]
AngleT11 := 0 deg
Dir1T := [Plant_Origin[0]; Plant_Origin[1]; Plant_Origin[2]]
InsertionPoint1T := [20 m; Plant_Origin[1] + 20 m; Plant_Origin[2]]
AngleT12 := 180 deg
SectCut1TSpin := stack(SelectLayer("trans1"), SectionCutSpin(Trans11, Trans12, 0, 1, "Transversal One", InsertionPoint1T, AngleT11, AngleT12, disp_1, spin_matrix))
SectCut1T := stack(SelectLayer("trans1"), SectionCut(Trans11, Trans12, 0, 1, "Transversal One", InsertionPoint1T, AngleT11, AngleT12))
# 2) Inside the filter box (through the center of a branch) - looking left (negative x direction)
Trans21 := [Fi_origin[0] - L_Fi/2; Plant_Origin[1] - T_PlantWall; Plant_Origin[2]]
Trans22 := [Fi_origin[0] - L_Fi/2; W_Trans1; Plant_Origin[2]]
AngleT21 := 0 deg
Dir2T := [Plant_Origin[0] + Floor_Dim[0]; Plant_Origin[1]; Plant_Origin[2]]
InsertionPoint2T := [2*20*m; Plant_Origin[1] + 20 m; Plant_Origin[2]]
AngleT22 := 0.0001 deg
SectCut2TSpin := stack(SectionCutSpin(Trans21, Trans22, 0, 0, "Transversal Two", InsertionPoint2T, AngleT21, AngleT22, disp_1, spin_matrix))
SectCut2T := stack(SectionCut(Trans21, Trans22, 0, 0, "Transversal Two", InsertionPoint2T, AngleT21, AngleT22))
# 3) Between the filter box and the filter’s exit box (avoid cutting the vertical siphon pipe or cut it down the center, if possible avoid cutting chemical tanks and plumbing off center) - looking left
Trans31 := [
    FiSiphonTee2_Origin[0] + ShortTeeLength(ND_FiSiphon);
    Plant_Origin[1] - T_PlantWall;
    Plant_Origin[2]
]
Trans32 := [FiSiphonTee2_Origin[0] + ShortTeeLength(ND_FiSiphon); W_Trans1; Plant_Origin[2]]
AngleT31 := 0 deg
Dir3T := [Plant_Origin[0] + Floor_Dim[0]; Plant_Origin[1]; Plant_Origin[2]]
InsertionPoint3T := [3*20*m; Plant_Origin[1] + 20 m; Plant_Origin[2]]
AngleT32 := 180 deg
SectCut3TSpin := SectionCutSpin(Trans31, Trans32, 0, 0, "Transversal Three", InsertionPoint3T, AngleT31, AngleT32, disp_1, spin_matrix)
SectCut3T := SectionCut(Trans31, Trans32, 0, 0, "Transversal Three", InsertionPoint3T, AngleT31, AngleT32)
# 4) Inside the filter’s entrance box (through the center of the most distance entrance pipes or to the right of them) - looking left
# ConRadius no longer exists. It is now OR.Fitting
Trans41 := [
    FiEntranceBox_origin[0] - L_FiEntrance + L_FiOverflowWeir - (OR_Fitting(ND_FiTrunk) + S_Fitting);
    Plant_Origin[1] - T_PlantWall;
    FiEntranceBox_origin[2]
]
Trans42 := [
    FiEntranceBox_origin[0] - L_FiEntrance + L_FiOverflowWeir - (OR_Fitting(ND_FiTrunk) + S_Fitting);
    W_Trans1;
    FiEntranceBox_origin[2]
]
AngleT41 := 0 deg
Dir4T := [
    FiEntranceBox_origin[0] - L_FiEntrance;
    FiEntranceBox_origin[1] + W_FiEntrance;
    FiEntranceBox_origin[2]
]
InsertionPoint4T := [4*20*m; Plant_Origin[1] + 20 m; Plant_Origin[2]]
AngleT42 := 180 deg
SectCut4TSpin := SectionCutSpin(Trans41, Trans42, 0, 0, "Transversal Four", InsertionPoint4T, AngleT41, AngleT42, disp_1, spin_matrix)
SectCut4T := SectionCut(Trans41, Trans42, 0, 0, "Transversal Four", InsertionPoint4T, AngleT41, AngleT42)
# FiSiphonChannelPipe.Origin is not real any more. Is this the best location for this 'Trans'?
# 5) Drain channel (through the center of the siphon pipe exits or to the right of them, avoid cutting into the sed tank drain valves if possible) - looking left
FiSiphonDrainExit_x := FiSiphonTee2_Origin[0] + ShortTeeLength(ND_FiSiphon)
Trans51 := [FiSiphonDrainExit_x; Plant_Origin[1] - T_PlantWall; Plant_Origin[2]]
Trans52 := [FiSiphonDrainExit_x; W_Trans1; Plant_Origin[2]]
# STOP HERE FOR NOW
Dir5T := [Fi_origin[0]; Fi_origin[1]; Fi_origin[2]]
AngleT51 := 0 deg
InsertionPoint5T := [5*20*m; Plant_Origin[1] + 20 m; Plant_Origin[2]]
AngleT52 := 180 deg
SectCut5TSpin := stack(SectionCutSpin(Trans51, Trans52, 0, 0, "Transversal Five", InsertionPoint5T, AngleT51, AngleT52, disp_1, spin_matrix), layer_freeze("*"))
SectCut5T := stack(SectionCut(Trans51, Trans52, 0, 0, "Transversal Five", InsertionPoint5T, AngleT51, AngleT52), layer_freeze("*"))
# This has to come first in the beta server but does not go into testing on other computers.
netload := stack("netload", "sectionplanetoblock.ddl")
AC_SectionCuts := stack(MakeTopView, MakeLayers_start, Copy_Trans1, rotatecopy_Trans1, Copy_Trans2, SectCut1L, SectCut2L, SectCut1TSpin, SectCut2TSpin, SectCut3TSpin, SectCut4TSpin, SectCut5TSpin)
Ins2 := [40 m; 0 m; 0 m]
# NOT USING YET!
Ins4 := [40 m; 20 m; 0 m]
spin*Tpt2 =  # error
