Q_Plant := 15*L/s  # Can be changed to match the flow of any plant. For our testing we used the stock drawing of the 15 L/s plant.
# [reference: EtFlocSedFi.xmcd]
# This code creates section cuts through the AguaClara plant and then inserts the section cuts onto the model space in an array so that separate sheets can be created from the section cuts once they are finalized. The creation of a function, SectionCut, is the main function used throughout this code to define and create these section cuts.
SectionCut(Point1, Point2, Direction, SectionName, Point3, Angle1) :=
    SwitchSpace ← ".ms"
    FreezeAll ← FreezeLayer("*")
    SectionLayer ← layer_new(SectionName, blue)
    DrawSection ← concat("Sectionplane", sp, "D")
    Point1 ← concat(point(Point1))
    Point2 ← concat(point(Point2))
    Direction ← concat(point(Direction))
    Thaw ← concat("laythw")
    SelectSection ← concat("Select", sp, "L")
    SectionPlanetoBlock ← concat("Sectionplanetoblock", sp)
    Rotation ← stringit_nounits(Angle1)
    InsertionPoint ← concat(point(Point3), sp, "1", sp, "1", sp, Rotation)
    return stack(SwitchSpace, FreezeAll, SectionLayer, DrawSection, Point1, Point2, sp, Direction, Thaw, SelectSection, sp, SectionPlanetoBlock, InsertionPoint)
# LONGITUDINAL
# The Longitudinal cuts are contained within this area. Each cut is explained and defined.
# 1) Just above the entrance tank upper wall (outside of the plant) - looking downward (negative y direction) (inwards into the plant)
Lang := stringit_nounits(Language)
SetLayout(Layout) := concat("layout", sp, "s", sp, Layout)
RenameLayout(Original, New) := stack(concat("layout", sp, "r", sp, Original), New)
LoadTemplate := stack(concat("-layout", sp, "ba", sp, "AguaClara", sp, Lang), "View")
RenameBackview := RenameLayout("View", "BackView")
SetBackview := SetLayout("Backview")
ZoomView := concat("z", sp, "o", sp, "all", sp)
Zoom := concat("zoom", sp, "1/2XP")
BackViewPlant := stack(LoadTemplate, RenameBackview, SetBackview, ".ms", view("ba"), ZoomView, Zoom, "model")
# 2) Entrance tank (through the center of the drainage pipes) - looking upward (positive y direction)
Long12 := [
    Et_Origin[0];
    Et_Origin[1] - T_PlantWall + L_EtSupport + T_ChannelWall + S_Fitting + ConRadius(ND_EtDrain);
    Et_Origin[2]
]
Long22 := [
    Et_Origin[0] - L_Et;
    Et_Origin[1] - T_PlantWall + L_EtSupport + T_ChannelWall + S_Fitting + ConRadius(ND_EtDrain);
    Et_Origin[2]
]
Dir12 := [Et_Origin[0]; Et_Origin[1] + W_Et; Et_Origin[2]]
InsertionPoint12 := [Plant_Origin[0] - 3*Floor_Dim[0]/4; Plant_Origin[1]; Plant_Origin[2]]
Angle12 := 0 deg
SectCut12 := SectionCut(Long12, Long22, Dir12, "Longitudinal Two", InsertionPoint12, Angle12)
# 3) Walkway between entrance tank and flocculator (center) - looking upward
Long13 := [Floc_Origin[0]; Floc_Origin[1] + W_Floc + T_PlantWall + Z_Walkway/2; Floc_Origin[2]]
Long23 := [
    Floc_Origin[0] - L_Floc - T_PlantWall - Z_Walkway/2;
    Floc_Origin[1] + W_Floc + T_PlantWall + Z_Walkway/2;
    Floc_Origin[2]
]
Dir13 := [Et_Origin[0]; Et_Origin[1]; Et_Origin[2]]
InsertionPoint13 := [InsertionPoint12[0] - 3*Floor_Dim[0]/4; Plant_Origin[1]; Plant_Origin[2]]
Angle13 := 0 deg
SectCut13 := SectionCut(Long13, Long23, Dir13, "Longitudinal Three", InsertionPoint13, Angle13)
# 4) Flocculator (center of a channel, avoiding cutting chem barrels and plumbing off-center if possible) - looking upward
Long14 := [
    Floc_Origin[0];
    Floc_Origin[1] + (N_FlocChannels - 1)*W_FlocChannel + (N_FlocChannels - 1)*T_FlocChannelWall + W_FlocChannel/2;
    Floc_Origin[2]
]
Long24 := [
    Floc_Origin[0] - L_Floc - T_PlantWall;
    Floc_Origin[1] + (N_FlocChannels - 1)*W_FlocChannel + (N_FlocChannels - 1)*T_FlocChannelWall + W_FlocChannel/2;
    Floc_Origin[2]
]
Dir14 := [Et_Origin[0]; Et_Origin[1]; Et_Origin[2]]
InsertionPoint14 := [InsertionPoint13[0] - 3*Floor_Dim[0]/4; Plant_Origin[1]; Plant_Origin[2]]
Angle14 := 0 deg
SectCut14 := SectionCut(Long14, Long24, Dir14, "Longitudinal Four", InsertionPoint14, Angle14)
# 5) Sedimentation tank (down the center of a bay - try to the choose one that cuts the filter in an informative way) - looking upward
Long15 := [
    Plant_Origin[0] + T_PlantWall;
    Plant_Origin[1] + (N_SedTanks - 1)*W_SedBay + (N_SedTanks - 1)*T_SedWallDivider + W_SedBay/2;
    Plant_Origin[2]
]
Long25 := [
    Floor_Dim[0];
    Plant_Origin[1] + (N_SedTanks - 1)*W_SedBay + (N_SedTanks - 1)*T_SedWallDivider + W_SedBay/2;
    Plant_Origin[2]
]
Dir15 := [Et_Origin[0]; Et_Origin[1]; Et_Origin[2]]
InsertionPoint15 := [InsertionPoint14[0] - 3*Floor_Dim[0]/4; Plant_Origin[1]; Plant_Origin[2]]
Angle15 := 0 deg
SectCut15 := SectionCut(Long15, Long25, Dir15, "Longitudinal Five", InsertionPoint15, Angle15)
# 6) Filter (through the center of the overflow box if there are two filters) - looking upward
Long16 := [FiOverflowBox_Origin[0]; FiOverflowBox_Origin[1] + W_FiOverflow/2; FiOverflowBox_Origin[2]]
Long26 := [
    FiOverflowBox_Origin[0] - L_FiOverflow;
    FiOverflowBox_Origin[1] + W_FiOverflow/2;
    FiOverflowBox_Origin[2]
]
InsertionPoint16 := [InsertionPoint15[0] - 3*Floor_Dim[0]/4; Plant_Origin[1]; Plant_Origin[2]]
Angle16 := 0 deg
Dir16 := [Et_Origin[0]; Et_Origin[1]; Et_Origin[2]]
SectCut16 := SectionCut(Long16, Long26, Dir16, "Longitudinal Six", InsertionPoint16, Angle16)
# 7) Sedimentation tank with plates (down the center of the bay) - looking upward
Long17 := [Plant_Origin[0] + T_PlantWall; Plant_Origin[1] + W_SedBay/2; Plant_Origin[2]]
Long27 := [Plant_Origin[0] - L_Sed - T_PlantWall - Z_Walkway/2; Plant_Origin[1] + W_SedBay/2; Plant_Origin[2]]
Dir17 := [Et_Origin[0]; Et_Origin[1]; Et_Origin[2]]
InsertionPoint17 := [InsertionPoint16[0] - Floor_Dim[0]; Plant_Origin[1]; Plant_Origin[2]]
Angle17 := 0 deg
SectCut17 := SectionCut(Long17, Long27, Dir17, "Longitudinal Seven", InsertionPoint17, Angle17)
# 8) Just below the last sed tank wall (outside of the plant) - looking upward (inwards into the plant)
Lang := stringit_nounits(Language)
SetLayout(Layout) := concat("layout", sp, "s", sp, Layout)
RenameLayout(Original, New) := stack(concat("layout", sp, "r", sp, Original), New)
LoadTemplate := stack(concat("-layout", sp, "f", sp, "AguaClara", sp, Lang), "View")
RenameFrontview := RenameLayout("View", "FrontView")
SetFrontview := SetLayout("FrontView")
ZoomView := concat("z", sp, "o", sp, "all", sp)
Zoom := concat("zoom", sp, "1/2XP")
FrontViewPlant := stack(LoadTemplate, RenameFrontview, SetFrontview, ".ms", view("f"), ZoomView, Zoom, "model")
LongitudinalTest := stack(BackViewPlant, SectCut12, SectCut13, SectCut14, SectCut15, SectCut17, FrontViewPlant)
# TRANSVERSAL
# The Transversal cuts are contained within this area. Each cut is explained and defined.
# 1) To the left of the filter’s outside wall (outside of the plant) - looking to the right (inwards into the plant)
Lang := stringit_nounits(Language)
SetLayout(Layout) := concat("layout", sp, "s", sp, Layout)
RenameLayout(Original, New) := stack(concat("layout", sp, "l", sp, Original), New)
LoadTemplate := stack(concat("-layout", sp, "l", sp, "AguaClara", sp, Lang), "View")
RenameLeftview := RenameLayout("View", "LeftView")
SetLeftview := SetLayout("LeftView")
ZoomView := concat("z", sp, "o", sp, "all", sp)
Zoom := concat("zoom", sp, "1/2XP")
LeftViewPlant := stack(LoadTemplate, RenameLeftview, SetLeftview, ".ms", view("l"), ZoomView, Zoom, "model")
# 2) Inside the filter box (through the center of a branch) - looking left (negative x direction)
LongT2 := [Fi_origin[0] - L_Fi/2; Fi_origin[1] - T_FiWall; Fi_origin[2]]
LongT22 := [Fi_origin[0] - L_Fi/2; Fi_origin[1] + W_Fi + T_FiWall; Fi_origin[2]]
DirT2 := [Plant_Origin[0] + Floor_Dim[0]; Plant_Origin[1]; Plant_Origin[2]]
InsertionPointT2 := [InsertionPoint12[0]; InsertionPoint12[1] + 3*Floor_Dim[1]/4; InsertionPoint12[2]]
AngleT2 := 0 deg
SectCut22 := SectionCut(LongT2, LongT22, DirT2, "Transversal Two", InsertionPointT2, AngleT2)
# 3) Between the filter box and the filter’s exit box (avoid cutting the vertical siphon pipe or cut it down the center, if possible avoid cutting chemical tanks and plumbing off center) - looking left
LongT3 := [FiSiphonTee2_Origin[0] + ShortTeeLength(ND_FiSiphon); Fi_origin[1] - T_FiWall; Fi_origin[2]]
LongT33 := [FiSiphonTee2_Origin[0] + ShortTeeLength(ND_FiSiphon); Fi_origin[1] + W_Fi + T_FiWall; Fi_origin[2]]
DirT3 := [Plant_Origin[0] + Floor_Dim[0]; Plant_Origin[1]; Plant_Origin[2]]
InsertionPointT3 := [InsertionPointT2[0] - 3*Floor_Dim[0]/4; InsertionPointT2[1]; InsertionPointT2[2]]
AngleT3 := 0 deg
SectCut23 := SectionCut(LongT3, LongT33, DirT3, "Transversal Three", InsertionPointT3, AngleT3)
# 4) Inside the filter’s entrance box (through the center of the most distance entrance pipes or to the right of them) - looking left
LongT4 := [
    FiEntranceBox_origin[0] - L_FiEntrance + L_FiOverflowWeir - (ConRadius(ND_FiTrunk) + S_Fitting);
    FiEntranceBox_origin[1];
    FiEntranceBox_origin[2]
]
LongT24 := [
    FiEntranceBox_origin[0] - L_FiEntrance + L_FiOverflowWeir - (ConRadius(ND_FiTrunk) + S_Fitting);
    FiEntranceBox_origin[1] + W_FiEntrance;
    FiEntranceBox_origin[2]
]
InsertionPointT4 := [InsertionPointT3[0] - 3*Floor_Dim[0]/4; InsertionPointT2[1]; InsertionPointT2[2]]
AngleT4 := 0 deg
DirT4 := [Et_Origin[0]; Et_Origin[1]; Et_Origin[2]]
SectCut24 := SectionCut(LongT4, LongT24, DirT4, "Transversal Four", InsertionPointT4, AngleT4)
# 5) Drain channel (through the center of the siphon pipe exits or to the right of them, avoid cutting into the sed tank drain valves if possible) - looking left
LongT5 := [FiSiphonChannelPipe_Origin[0]; Floor_Dim[1] - T_PlantWall; Plant_Origin[2]]
LongT25 := [FiSiphonChannelPipe_Origin[0]; Plant_Origin[1] - T_PlantWall; Plant_Origin[2]]
InsertionPointT5 := [InsertionPointT4[0] - 3*Floor_Dim[0]/4; InsertionPointT2[1]; InsertionPointT2[2]]
AngleT5 := 0 deg
DirT5 := [Fi_origin[0]; Fi_origin[1]; Fi_origin[2]]
SectCut25 := SectionCut(LongT5, LongT25, DirT5, "Transversal Five", InsertionPointT5, AngleT5)
# 6) Center of the first hopper of the entrance tank (should take care of flocculator and sed tank transversal cuts) - looking left
LongT6 := [
    (Et_Origin[0] - L_EtHopper - T_EtHopperLedge) - S_Fitting - ConRadius(ND_EtDrain);
    Floor_Dim[1] - T_PlantWall;
    Plant_Origin[2]
]
LongT26 := [
    (Et_Origin[0] - L_EtHopper - T_EtHopperLedge) - S_Fitting - ConRadius(ND_EtDrain);
    Plant_Origin[1] - T_PlantWall;
    Plant_Origin[2]
]
DirT6 := [Fi_origin[0]; Fi_origin[1]; Fi_origin[2]]
InsertionPointT6 := [InsertionPointT5[0] - 3*Floor_Dim[0]/4; InsertionPointT2[1]; InsertionPointT2[2]]
AngleT6 := 0 deg
SectCut26 := SectionCut(LongT6, LongT26, DirT6, "Transversal Six", InsertionPointT6, AngleT6)
# 7) To the right of the furthest wall of the sed/floc tanks (outside the plant) - looking left (inwards into the plant)
Lang := stringit_nounits(Language)
SetLayout(Layout) := concat("layout", sp, "s", sp, Layout)
RenameLayout(Original, New) := stack(concat("layout", sp, "ri", sp, Original), New)
LoadTemplate := stack(concat("-layout", sp, "ri", sp, "AguaClara", sp, Lang), "View")
RenameRightview := RenameLayout("View", "RightView")
SetRightview := SetLayout("RightView")
ZoomView := concat("z", sp, "o", sp, "all", sp)
Zoom := concat("zoom", sp, "1/2XP")
RightViewPlant := stack(LoadTemplate, RenameRightview, SetRightview, ".ms", view("ri"), ZoomView, Zoom, "model")
TransversalTest := stack(LeftViewPlant, SectCut22, SectCut23, SectCut24, SectCut25, SectCut26, RightViewPlant)
# OLD LAYOUTS AC FILE
# This area is code from a previous semester that we used to help guide our creation of the SectionCut function. It is merely here as reference.
Lang := stringit_nounits(Language)
SetLayout(Layout) := concat("layout", sp, "s", sp, Layout)
RenameLayout(Original, New) := stack(concat("layout", sp, "r", sp, Original), New)
PrepLayouts := stack("laythw", concat("-layout", sp, "t", sp, "AguaClara", sp, Lang), "View", concat("layout", sp, "d", sp, "Layout1"), concat(sp, "d", sp, "Layout2"))
RenameView := RenameLayout("View", "TopView")
SetTopView := SetLayout("TopView")
# Sed layers - "Sed"
# Filter layers - "Fi"
# Floc Layers - "Floc"
# EntranceTank Layers - "Et"
# Cdc layers - "Cdc"
# rapid mix layers - "RM"
# coagulant tank layers - "Coag"
# chlorine tank layers - "Chlor"
ZoomView := concat("z", sp, "o", sp, "all", sp)
# .ms
TopViewPlant := stack(RenameView, SetTopView, ".ms", ZoomView)
LoadTemplate := stack(concat("-layout", sp, "t", sp, "AguaClara", sp, Lang), "View")
RenameFrontView := RenameLayout("View", "FrontView")
SetFrontView := SetLayout("FrontView")
# ZoomView
FrontViewPlant := stack(LoadTemplate, RenameFrontView, SetFrontView, ".ms", view("f"), ZoomView)
RenameLeftView := RenameLayout("View", "LeftView")
SetLeftView := SetLayout("LeftView")
# ZoomView
LeftViewPlant := stack(LoadTemplate, RenameLeftView, SetLeftView, ".ms", view("l"), ZoomView)
# Layouts of specific pieces
EtLayout := ViewPort(["~Et*"], "Et", Lang)
FlocLayout := ViewPort(["~Floc*"], "Floc", Lang)
SedOpLayout := ViewPort(["~Sed*"; "SedInletStopperPlu"; "SedLaunderCouplingCapPlu"], "RunningSed", Lang)
SedDrainLayout := ViewPort(["~Sed*"], "DrainingSed", Lang)
SedRefillLayout := ViewPort(["~Sed*"; "SedLaunderCouplingCapPlu"], "RefillingSed", Lang)
FiltLayout := ViewPort(["~Fi*"], "Filt", Lang)
CdcLayout := ViewPort(["~Cdc*"], "Cdc", Lang)
# Special Layouts
BaffleModuleLayout := ViewPort(["~FlocMod*"], "FlocModule", Lang)
SedModuleLayout := ViewPort(["~SedMod*"], "SedLamina", Lang)
CoagLayout := ViewPort(["~Coag*"], "Coag", Lang)
ChlorLayout := ViewPort(["~Chlor*"], "Chlor", Lang)
ConcreteLayout := ViewPort(["~*Con"], "Concrete", Lang)
PipingLayout := ViewPort(["~*Plu"], "Plu", Lang)
SpecificLayouts :=
    stack(SedModuleLayout, CoagLayout, ChlorLayout, ConcreteLayout, PipingLayout) if EN_FlocHoriz == 1
    stack(BaffleModuleLayout, SedModuleLayout, CoagLayout, ChlorLayout, ConcreteLayout, PipingLayout) otherwise
DimensionScript :=
    SedTopDimLayer ← layer_new("SedTopDimension", purple)
    AddDim1 ← LinearDim(Plant_Origin, W_Sed, L_Sed + W_Sed, "v")
    AddDim2 ← LinearDim(Plant_Origin, -L_Sed, echannelbox_dim[1] + .5 m, "h")
    AddDim3 ← LinearDim(echannel_origin, echannelbox_dim[1], -W_Sed, "v")
    AddDim4 ← LinearDim(echannel_origin, -echannelbox_dim[0], -W_Sed, "h")
    AddDim5 ← LinearDim(channel_origin, -channelbox_dim[0], -W_Sed, "h")
    SedTopDim ← concat(AddDim1, AddDim2, AddDim3, AddDim4, AddDim5)
    SedSideDimLayer ← layer_new("SedSideDimension", purple)
    SedFrontDimLayer ← layer_new("SedFrontDimension", purple)
    return concat(SedTopDimLayer, SedTopDim, SedSideDimLayer, SedFrontDimLayer)
AC_Layout := stack(PrepLayouts, TopViewPlant, FrontViewPlant, LeftViewPlant, EtLayout, FlocLayout, SedOpLayout, SedDrainLayout, SedRefillLayout, FiltLayout, CdcLayout, SpecificLayouts, concat("layout", sp, "s", sp, "model", sp), [concat("-view", sp, "_SEISO", sp)])
