# [reference: MasterProgram.xmcd]
# Automated Design: AutoCAD: Sedimentation Tank
# Dimension Values
channelbox_dim :=
    dim ← [W_InletChannel; (N_SedTanks*W_Sed) + ((N_SedTanks + 1)*T_PlantWall); H_InletChannel] if sedlayout == 2
    dim ← [W_InletChannel; N_SedTanks*(W_Sed + T_PlantWall); H_InletChannel] if sedlayout == 3
    return dim
echannelbox_dim := [W_ExitChannel; N_SedTanks*(W_Sed + T_PlantWall); H_ExitChannel]
channelinletbox1_dim := [T_PlantWall; L_Channelinlet; H_InletChannel]
channelinletbox2_dim := [W_InletChannel; W_Sed; H_Sed]
L_SedActive = 3.271 m
L_Sed = 5.14286 m
sedbottombox_dim := [-L_Sed; W_Sed; T_PlantWall]
channelclosebox_dim := [W_InletChannel + T_ChannelWall + T_PlantWall; T_PlantWall; H_InletChannel + T_ChannelWall]
channelinletwall_dim := [T_ChannelWall; W_Sed; H_Sed]
echanneltank_dim := [
    S_Elbow + ElbowRadius(ND_PltWeir) + ConRadius(ND_PltWeir) + SocketDepth(ND_PltWeir);
    4*ConRadius(ND_PltWeir) + 3*S_Elbow;
    H_ExitChannel
]
echanneltankbox_dim := [
    -(S_Elbow + ElbowRadius(ND_PltWeir) + ConRadius(ND_PltWeir) + SocketDepth(ND_PltWeir));
    4*ConRadius(ND_PltWeir) + 3*S_Elbow;
    ConRadius(ND_PltWeir) + ElbowRadius(ND_PltWeir) + SocketDepth(ND_PltWeir)
]
ichanneltank_dim := [
    max(S_Elbow + ElbowRadius(ND_PltWeir) + ConRadius(ND_PltWeir) + SocketDepth(ND_PltWeir), W_InletChannel);
    (2*ConRadius(ND_PltWeir)) + (2*S_Elbow);
    H_InletChannel
]
ichanneltankbox_dim := [
    -(S_Elbow + ElbowRadius(ND_PltWeir) + ConRadius(ND_PltWeir) + SocketDepth(ND_PltWeir));
    (2*ConRadius(ND_PltWeir)) + (2*S_Elbow);
    ConRadius(ND_PltWeir) + ElbowRadius(ND_PltWeir) + SocketDepth(ND_PltWeir)
]
textbox_dim := [L_Sed/2; W_SedBay]
sedweirexit_dim := [W_SedWeirExit; H_SedWeirExit; T_SedWeir] = [12.75; 0.412663; 0.04] m
sedweirinlet_dim := [W_SedWeirInlet; H_SedWeirInlet; T_SedWeir] = [12.75; 0.452663; 0.04] m
# Origins Points
channel_origin :=
    if sedlayout == 2
        origin ← [
            Plant_Origin[0] - L_Sed + W_InletChannel;
            Plant_Origin[1] - T_PlantWall;
            Plant_Origin[2] + H_Sed - H_InletChannel
        ]
    if sedlayout == 3
        origin ← [
            Plant_Origin[0] - L_Sed + W_InletChannel;
            Plant_Origin[1] - T_PlantWall;
            Plant_Origin[2] + H_Sed - H_InletChannel
        ]
    if sedlayout == 4
        origin ← [
            Plant_Origin[0] - L_Sed + W_InletChannel;
            Plant_Origin[1] - T_PlantWall;
            Plant_Origin[2] + H_Sed - H_InletChannel
        ]
    return origin
    = [-4.34777; -0.15; 0.944532] m
echannel_origin :=
    origin ← [0; 0; 0]*m
    origin ← [Plant_Origin[0]; Plant_Origin[1] - T_PlantWall; Plant_Origin[2] + H_Sed - H_ExitChannel] if sedlayout == 2
    if sedlayout == 3
        origin ← [
            Plant_Origin[0] - L_Sed + W_InletChannel + T_ChannelWall + W_ExitChannel;
            Plant_Origin[1] - T_PlantWall;
            Plant_Origin[2] + H_Sed - H_ExitChannel
        ]
    if sedlayout == 4
        origin ← [
            Plant_Origin[0] - L_Sed + W_InletChannel + T_ChannelWall + W_ExitChannel;
            Plant_Origin[1] - T_PlantWall;
            Plant_Origin[2] + H_Sed - H_ExitChannel
        ]
    return origin
channelinletwall_origin := [Plant_Origin[0] - L_Sed + W_InletChannel; Plant_Origin[1]; Plant_Origin[2]]
isubtractbox_origin := [Plant_Origin[0] - L_Sed + W_InletChannel; Plant_Origin[1]; Plant_Origin[2] + H_Sed]
echanneltank_origin :=
    if sedlayout == 2
        origin ← [
            Plant_Origin[0];
            Plant_Origin[1] - T_PlantWall - (4*ConRadius(ND_PltWeir)) - (3*S_Elbow);
            Plant_Origin[2] + H_Sed - H_ExitChannel
        ]
    if sedlayout == 3
        origin ← [
            Plant_Origin[0] - L_Sed + W_InletChannel + T_ChannelWall + S_Elbow + ElbowRadius(ND_PltWeir) + ConRadius(ND_PltWeir) + SocketDepth(ND_PltWeir);
            Plant_Origin[1] - T_PlantWall - (4*ConRadius(ND_PltWeir)) - (3*S_Elbow);
            Plant_Origin[2] + H_Sed - H_ExitChannel
        ]
    origin
ichanneltank_origin :=
    origin ← [
        Plant_Origin[0] - L_Sed - T_PlantWall + ichanneltank_dim[0] + 2*T_PlantWall;
        Plant_Origin[1] - 2*T_PlantWall - (2*ConRadius(ND_PltWeir)) - (2*S_Elbow);
        Plant_Origin[2] + H_Sed - H_InletChannel
    ]
    origin
    = [-4.19777; -0.78862; 0.944532] m
channelbox_origin := [Plant_Origin[0] - L_Sed; Plant_Origin[1] - T_PlantWall; Plant_Origin[2] + H_Sed - H_InletChannel]
echannelbox_origin :=
    origin ← [0; 0; 0]*m
    if sedlayout == 2
        origin ← [
            Plant_Origin[0] - W_ExitChannel;
            Plant_Origin[1] - T_PlantWall;
            Plant_Origin[2] + H_Sed - H_ExitChannel
        ]
    if sedlayout == 3
        origin ← [
            Plant_Origin[0] - L_Sed + W_InletChannel + T_ChannelWall;
            Plant_Origin[1] - T_PlantWall;
            Plant_Origin[2] + H_Sed - H_ExitChannel
        ]
    if sedlayout == 4
        origin ← [
            Plant_Origin[0] - L_Sed + W_InletChannel + T_ChannelWall;
            Plant_Origin[1] - T_PlantWall;
            Plant_Origin[2] + H_Sed - H_ExitChannel
        ]
    return origin
channelinletbox1_origin := [
    Plant_Origin[0] - L_Sed - T_PlantWall;
    Plant_Origin[1] + (.5*W_Sed) - (.5*L_Channelinlet);
    Plant_Origin[2] + H_Sed - H_InletChannel
]
channelinletbox2_origin := [Plant_Origin[0] - L_Sed; Plant_Origin[1]; Plant_Origin[2]]
channelclosebox_origin := [
    Plant_Origin[0] - L_Sed - T_PlantWall - W_InletChannel - T_ChannelWall;
    Plant_Origin[1] - T_PlantWall;
    Plant_Origin[2] + H_Sed - H_InletChannel - T_ChannelWall
]
sedtankinletweirelbow_origin := [
    Plant_Origin[0] - L_Sed + echanneltank_dim[0] - SocketDepth(ND_PltWeir) - ElbowRadius(ND_PltWeir);
    Plant_Origin[1] - T_PlantWall - S_Elbow - ConRadius(ND_PltWeir);
    Plant_Origin[2] + ElbowRadius(ND_PltWeir) + ConRadius(ND_PltWeir) - 2*ShortTeeLength(ND_PltWeir)
]
sedtankexitweirelbow_origin :=
    if sedlayout == 2
        origin ← [
            Plant_Origin[0] - SocketDepth(ND_PltWeir) - 2*ElbowRadius(ND_PltWeir);
            Plant_Origin[1] - T_PlantWall - S_Elbow - ConRadius(ND_PltWeir);
            Plant_Origin[2] + ElbowRadius(ND_PltWeir) + ConRadius(ND_PltWeir)
        ]
    if sedlayout == 3
        origin ← [
            Plant_Origin[0] - L_Sed + W_InletChannel + T_ChannelWall + echanneltank_dim[0] - SocketDepth(ND_PltWeir);
            Plant_Origin[1] - T_PlantWall - S_Elbow - ConRadius(ND_PltWeir);
            Plant_Origin[2] + ElbowRadius(ND_PltWeir) + ConRadius(ND_PltWeir)
        ]
    return ← origin
sedtankexitweirelbow2_origin :=
    if sedlayout == 2
        origin ← [
            Plant_Origin[0] - SocketDepth(ND_PltWeir);
            Plant_Origin[1] - T_PlantWall - 2*S_Elbow - 3*ConRadius(ND_PltWeir);
            Plant_Origin[2] + ElbowRadius(ND_PltWeir) + ConRadius(ND_PltWeir)
        ]
    if sedlayout == 3
        origin ← [
            Plant_Origin[0] - L_Sed + W_InletChannel + T_ChannelWall + echanneltank_dim[0] - SocketDepth(ND_PltWeir);
            Plant_Origin[1] - T_PlantWall - S_Elbow - ConRadius(ND_PltWeir);
            Plant_Origin[2] + ElbowRadius(ND_PltWeir) + ConRadius(ND_PltWeir)
        ]
    return ← origin
exitweirpipecopy1_point :=
    if sedlayout == 2
        point ← [
            Plant_Origin[0] - SocketDepth(ND_PltWeir) - ElbowRadius(ND_PltWeir) - innerR(ND_PltWeir, EN_PipeSpec);
            Plant_Origin[1] - T_PlantWall - S_Elbow - ConRadius(ND_PltWeir);
            Plant_Origin[2] + ConRadius(ND_PltWeir) + ElbowRadius(ND_PltWeir)
        ]
    if sedlayout == 3
        point ← [
            Plant_Origin[0] - L_Sed + W_InletChannel + T_ChannelWall + echanneltank_dim[0] - SocketDepth(ND_PltWeir) - ElbowRadius(ND_PltWeir) - innerR(ND_PltWeir, EN_PipeSpec);
            Plant_Origin[1] - T_PlantWall - S_Elbow - ConRadius(ND_PltWeir);
            Plant_Origin[2] + ConRadius(ND_PltWeir) + ElbowRadius(ND_PltWeir)
        ]
    return point
exitweirpipecopy2_point :=
    if sedlayout == 2
        point ← [
            Plant_Origin[0] - SocketDepth(ND_PltWeir) - ElbowRadius(ND_PltWeir) - innerR(ND_PltWeir, EN_PipeSpec);
            Plant_Origin[1] - T_PlantWall - 2*S_Elbow - 3*ConRadius(ND_PltWeir);
            Plant_Origin[2] + ConRadius(ND_PltWeir) + ElbowRadius(ND_PltWeir)
        ]
    if sedlayout == 3
        point ← [
            Plant_Origin[0] - L_Sed + W_InletChannel + T_ChannelWall + echanneltank_dim[0] - SocketDepth(ND_PltWeir) - ElbowRadius(ND_PltWeir) - innerR(ND_PltWeir, EN_PipeSpec);
            Plant_Origin[1] - T_PlantWall - 2*S_Elbow - 3*ConRadius(ND_PltWeir);
            Plant_Origin[2] + ConRadius(ND_PltWeir) + ElbowRadius(ND_PltWeir)
        ]
    return point
sedtankinletpipe1_origin := [
    Plant_Origin[0] - L_Sed + (.5*W_InletChannel);
    Plant_Origin[1] + (W_Sed/(2*N_SedInletPipes*N_SedBays));
    Plant_Origin[2] + H_Sed - H_InletChannel
]
inletweirpipe_origin := [
    Plant_Origin[0] - L_Sed + S_Elbow + ConRadius(ND_PltWeir);
    Plant_Origin[1] - T_PlantWall - S_Elbow - ConRadius(ND_PltWeir);
    Plant_Origin[2] + ElbowRadius(ND_PltWeir) + ConRadius(ND_PltWeir)
]
exitweirpipe_origin :=
    if sedlayout == 2
        origin ← [
            Plant_Origin[0] - ElbowRadius(ND_PltWeir) - SocketDepth(ND_PltWeir);
            Plant_Origin[1] - T_PlantWall - S_Elbow - ConRadius(ND_PltWeir);
            Plant_Origin[2] + ElbowRadius(ND_PltWeir) + ConRadius(ND_PltWeir)
        ]
    if sedlayout == 3
        origin ← [
            Plant_Origin[0] - L_Sed + W_InletChannel + T_ChannelWall + S_Elbow + ConRadius(ND_PltWeir);
            Plant_Origin[1] - T_PlantWall - S_Elbow - ConRadius(ND_PltWeir);
            Plant_Origin[2] + ElbowRadius(ND_PltWeir) + ConRadius(ND_PltWeir)
        ]
    return ← origin
Sedbottomslopes_origin := [0; 0; 0]
Sedbottomslopes_dim := [
    Sedbottomslopes_origin[0] + W_SedBayActual;
    Sedbottomslopes_origin[1] + H_SedSludge + T_SedSludge;
    Sedbottomslopes_origin[2] + L_Sed
]
SedDrain_origin := [
    Sedbottomslopes_origin[0] + Sedbottomslopes_dim[0]/2 - W_SedSludge/2;
    Sedbottomslopes_origin[1];
    Sedbottomslopes_origin[2]
]
SedDrain_dim := [SedDrain_origin[0] + W_SedSludge; SedDrain_origin[1] + H_SedSludge; SedDrain_origin[2] + L_Sed]
SedDrainCover_origin := [
    Sedbottomslopes_origin[0] + Sedbottomslopes_dim[0]/2 - W_SedDrainCover/2;
    Sedbottomslopes_origin[1] + H_SedSludge;
    Sedbottomslopes_origin[2]
]
SedDrainCover_dim := [
    SedDrainCover_origin[0] + W_SedDrainCover;
    SedDrainCover_origin[1] + T_SedSludge;
    SedDrainCover_origin[2] + L_Sed
]
Sedbottomslopeslope_origin := [
    Sedbottomslopes_origin[0] + W_SedInletBottom;
    Sedbottomslopes_origin[1] + Sedbottomslopes_dim[1];
    Sedbottomslopes_origin[2]
]
SedBayDivider_Origin := [Plant_Origin[0]; Plant_Origin[1] + W_Sed/2 - W_SedBayDivider/2; Plant_Origin[2]]
SedBayDivider_Dim := [
    SedBayDivider_Origin[0] - L_Sed;
    SedBayDivider_Origin[1] + W_SedBayDivider;
    SedBayDivider_Origin[2] + H_SedBayDivider
]
DrainCover_origin := [
    Plant_Origin[0];
    Plant_Origin[1] + Sedbottomslopes_dim[0]/2 - W_SedDrainCover/2;
    Plant_Origin[2] + H_SedSludge
] = [0; 0.318712; 0.0812885] m
W_InletChannel = 0.795088 m
L_SedPlate*cos(AN_SedPlate) = 0.261257 m
L_Sed = 5.14286 m
W_ExitChannel + T_PlantWall + T_SedPlate/sin(AN_SedPlate)
lamina_origin := [
    Plant_Origin[0] - L_Sed + W_InletChannel + T_ChannelWall + L_SedPlate*cos(AN_SedPlate);
    Plant_Origin[1];
    Plant_Origin[2] + H_SedBayDivider + 2*outerdiameter(ND_SedPlateFrame)
] = [-3.93651; 0; 0.809061] m  # These are the assumed dimensions for the frame that supports the lamella, they should probably be defined somewhere else.
pipeframe_origin := [
    Plant_Origin[0] - L_Sed + W_InletChannel + L_SedPlate*cos(AN_SedPlate) + T_ChannelWall - 2*zc;
    H_SedBayDivider + outerdiameter(ND_SedPlateFrame)/2;
    0 m
]
L_Sed = 5.14286 m
Plant_Origin[0] - L_Sed + W_InletChannel + T_PlantWall = -4.19777 m
SedLaunder_origin := [
    Plant_Origin[0] - L_Sed + W_InletChannel + T_ChannelWall;
    Plant_Origin[1] + W_Sed/(N_SedLaunders*N_SedBays*2);
    Plant_Origin[2] + HW_Sed - H_SedAbove + outerradius(ND_SedLaunder)
] = [-4.19777; 0.25; 1.31872] m
SedLaunderOrifice_origin := [SedLaunder_origin[0]; SedLaunder_origin[1]; SedLaunder_origin[2] + L_Sed - B_SedLaunderOrifices]
textbox_origin := [-2*L_Sed; W_SedBay]
sedweirexit_origin := [
    {
        -W_ExitChannel if Geom_ExitChannel == Perpindicular_Weir
        -T_PlantWall otherwise
    };
    H_Sed - H_ExitChannel;
    {
        T_PlantWall - T_SedWeir if Geom_ExitChannel == Perpindicular_Weir
        -w_minchannelHL(H_SedWeirExit, HW_ExitChannel, Q_Plant, L_Channel, Nu_Water, E_Concrete, 1, HL_SedWeirExit) - T_SedWeir otherwise
    }
]
sedweirinlet_origin := [
    {
        -L_Sed if Geom_InletChannel == Perpindicular_Weir
        -T_PlantWall otherwise
    };
    H_Sed - H_InletChannel;
    {
        T_PlantWall - T_SedWeir if Geom_InletChannel == Perpindicular_Weir
        -L_Sed + W_InletChannelEst otherwise
    }
]
FlocHopper_origin := [0; 0; 0]
FlocHopperBox_dim := [L_FlocHopper; T_FlocHopper; H_FlocHopper]  # error: This variable is undefined.
FlocHopperWedge_dim := [(L_FlocHopper - W_FlocHopper)/2; T_FlocHopper; FlocHopper_origin[2]]  # error: This variable is undefined.
isubractbox_dim := [W_InletChannel; T_PlantWall; H_InletChannel]
# Sedtank Scripts
Sedtanktankscript :=
    viewtops ← viewtop1
    layer1 ← layer_new("tank", grey)
    tank1 ← Tank(Plant_Origin, [L_Sed; W_Sed; H_Sed], T_PlantWall)
    layerset ← layer_set("0")
    layerfreeze1 ← layer_freeze("tank")
    one ← stack(viewtops, layer1, tank1, layerset, layerfreeze1)
    return one
Sedtanksubtractchannelscript :=
    viewfront ← viewfront1
    box1 ← box([-L_Sed + T_ChannelWall; H_Sed - H_InletChannel; T_PlantWall + zc], [-L_Sed + T_ChannelWall + W_InletChannel; H_Sed; -L_Channel - zc])
    layerthaw ← layer_thaw("tank")
    subtract1 ← subtractD(Plant_Origin, [-L_Sed + T_ChannelWall + W_InletChannel; H_Sed; -L_Channel + T_PlantWall + zc])
    box2 ← box([-W_ExitChannel; H_Sed - H_ExitChannel; T_PlantWall + zc], [Plant_Origin[0]; H_Sed; -L_Channel - zc])
    subtract2 ← subtractD(Plant_Origin, [Plant_Origin[0]; H_Sed; -L_Channel - zc])
    viewtop ← viewtop1
    layerfreeze1 ← layer_freeze("tank")
    one ← stack(viewfront, box1, layerthaw, subtract1, box2, subtract2, viewtop, layerfreeze1)
    return one
Sedtankexitchannelscript :=
    layer2 ← layer_new("echannel", ltgrey)
    channel1 ← ChannelDrawing(echannel_origin, [W_Sed + 2*T_PlantWall; W_ExitChannel; H_ExitChannel], T_ChannelWall)
    rotate1 ← rotate(echannel_origin, 90)
    bigunion ← union_allA
    layerset ← layer_set("0")
    layerfreeze2 ← layer_freeze("echannel")
    one ← stack(layer2, channel1, rotate1, bigunion, layerset, layerfreeze2)
    return ← one
Sedtankexitweirscriptparallel :=
    viewright ← viewrightside1
    layerset ← layer_set("0")
    box1 ← box(Plant_Origin, sedweirexit_dim)
    move1 ← move_all(Plant_Origin, sedweirexit_origin)
    layernew1 ← layer_new("sedweirexit", ltgrey)
    layerfreeze ← layer_freeze("0")
    viewfront ← viewfront1
    box2 ← box(Plant_Origin, [W_ExitChannelMin + T_SedWeir; H_ExitChannel; sedweirexit_dim[2]])
    move2 ← move_all(Plant_Origin, [-W_ExitChannel; sedweirexit_origin[1]; T_PlantWall - T_SedWeir])
    layerthaw2 ← layer_thaw("0")
    union1 ← union_allA
    layerset ← layer_set("0")
    layerfreeze2 ← layer_freeze("sedweirexit")
    viewtop ← viewtop1
    one ← stack(viewright, layerset, box1, move1, layernew1, layerfreeze, viewfront, box2, move2, layerthaw2, union1, layerset, layerfreeze2, viewtop)
    return one
sedweirexit_origin = [-0.15; 0.944532; -0.261514] m
Sedtankexitweirscriptperpindicular :=
    layernew1 ← layer_new("sedweirexit", ltgrey)
    viewfront ← viewfront1
    box1 ← box(Plant_Origin, sedweirexit_dim)
    move1 ← move_all(Plant_Origin, sedweirexit_origin)
    layerset ← layer_set("0")
    layerfreeze2 ← layer_freeze("sedweirexit")
    viewtop ← viewtop1
    one ← stack(layernew1, viewfront, box1, move1, layerset, layerset, layerfreeze2, viewtop)
    return one
Sedtankexitweirscript :=
    Sedtankexitweirscriptperpindicular if Geom_ExitChannel == Perpindicular_Weir
    Sedtankexitweirscriptparallel otherwise
Sedtankinletweirscriptparallel :=
    viewright ← viewrightside1
    layerset ← layer_set("0")
    box1 ← box(Plant_Origin, sedweirinlet_dim)
    move1 ← move_all(Plant_Origin, sedweirinlet_origin)
    layernew1 ← layer_new("sedweirinlet", ltgrey)
    layerfreeze ← layer_freeze("0")
    viewfront ← viewfront1
    box2 ← box(Plant_Origin, [W_InletChannelEst + T_SedWeir; H_InletChannel; sedweirinlet_dim[2]])
    move2 ← move_all(Plant_Origin, [-L_Sed; sedweirinlet_origin[1]; T_PlantWall - T_SedWeir])
    viewtop ← viewtop1
    mirror1 ← mirror3d_all([-L_Sed + W_InletChannelEst; L_Channel/2 - T_ChannelWall; Plant_Origin[2]])
    layerthaw2 ← layer_thaw("0")
    union1 ← union_allA
    layerset ← layer_set("0")
    layerfreeze2 ← layer_freeze("sedweirinlet")
    viewtop ← viewtop1
    one ← stack(viewright, layerset, box1, move1, layernew1, layerfreeze, viewfront, box2, move2, viewtop, layerthaw2, union1, layerset, layerfreeze2, viewtop)
    return one
# pipe11_origin | pipe14_origin | pipe6_1ength | pipe7_length | pipe8_length | pipe13_length | pipe14_length
pipe5_1ength
Sedtankinletweirscriptperpindicular :=
    layernew1 ← layer_new("sedweirinlet", ltgrey)
    viewfront ← viewfront1
    box1 ← box(Plant_Origin, sedweirinlet_dim)
    move1 ← move_all(Plant_Origin, sedweirinlet_origin)
    layerset ← layer_set("0")
    layerfreeze2 ← layer_freeze("sedweirinlet")
    viewtop ← viewtop1
    one ← stack(layernew1, viewfront, box1, move1, layerset, layerset, layerfreeze2, viewtop)
    return one
sedweirinlet_origin = [-0.15; 0.944532; -4.59518] m
Sedtankinletweirscript :=
    Sedtankinletweirscriptperpindicular if Geom_InletChannel == Perpindicular_Weir
    Sedtankinletweirscriptparallel otherwise
# pipe12_origin | pipe13_origin | pipe1_length
Sedtankinletchannelscript :=
    layer2 ← layer_new("channel", ltgrey)
    channel1 ← ChannelDrawing(channel_origin, [W_Sed + 2*T_PlantWall; W_InletChannel; H_InletChannel], T_ChannelWall)
    rotate1 ← rotate(channel_origin, 90)
    box1 ← box(channelinletwall_origin, channelinletwall_origin + channelinletwall_dim)
    bigunion ← union_allA
    box2 ← box(channelinletbox1_origin, channelinletbox1_origin + channelinletbox1_dim)
    subtract2 ← subtractD(Plant_Origin, channelinletbox1_origin)
    box3 ← box(channelinletbox2_origin, channelinletbox2_origin + channelinletbox2_dim)
    subtract3 ← subtractD(Plant_Origin, channelinletbox2_origin)
    layerset ← layer_set("0")
    viewtops ← viewtop1
    layerfreeze2 ← layer_freeze("channel")
    one ← stack(layer2, channel1, rotate1, bigunion, layerset, viewtops, layerfreeze2) if sedlayout == 1
    one ← stack(layer2, channel1, rotate1, bigunion, layerset, layerfreeze2) if sedlayout == 2
    one ← stack(layer2, channel1, rotate1, bigunion, layerset, layerfreeze2) if sedlayout == 3
    one ← stack(layer2, channel1, rotate1, box1, bigunion, viewtops, box2, subtract2, box3, subtract3, layerset, viewtops, layerfreeze2) if sedlayout == 4
    return ← one
Sedbottomslopescript :=
    layer3 ← layer_new("bottomslopes", ltgrey)
    view ← viewrightside1
    pline8 ← pline8([Sedbottomslopeslope_origin[0]; Sedbottomslopeslope_origin[1]], [Sedbottomslopeslope_origin[0]; Sedbottomslopeslope_origin[1] - T_SedSludge], [Sedbottomslopeslope_origin[0] + T_ConcreteMin; Sedbottomslopeslope_origin[1] - T_SedSludge], [
        Sedbottomslopeslope_origin[0] + T_ConcreteMin;
        Sedbottomslopeslope_origin[1] - T_SedSludge - H_SedSludge
    ], [
        Sedbottomslopeslope_origin[0] - W_SedInletBottom;
        Sedbottomslopeslope_origin[1] - T_SedSludge - H_SedSludge
    ], [Sedbottomslopeslope_origin[0] - W_SedInletBottom; Z_SedSlopes], [Sedbottomslopeslope_origin[0] - W_SedInletBottom + T_ConcreteMin; Z_SedSlopes])
    extrude1 ← extrude(Sedbottomslopeslope_origin, -L_Sed)
    mirror3d1 ← mirror3dyz(Sedbottomslopeslope_origin, [
        Sedbottomslopeslope_origin[0] + W_SedDrainCover/2;
        Sedbottomslopeslope_origin[1];
        Sedbottomslopeslope_origin[2]
    ])
    unionall ← union_allA
    viewtop ← viewtop1
    arraybay1 ← concat("-array", sp, "ALL", sp, sp, "r", sp, stringit_nounits(N_SedBays), sp, "1", sp, stringit(W_SedBay + W_SedBayDivider/2))
    arraybay2 ← concat("-array", sp, "ALL", sp, sp, "r", sp, stringit_nounits(N_SedBays), sp, "1", sp, stringit((W_Sed - (N_SedBays - 1)*W_SedBayDivider)/N_SedBays + W_SedBayDivider))
    layerfreeze3 ← layer_freeze("bottomslopes")
    layerset ← layer_set("0")
    one ← stack(layer3, view, pline8, view, extrude1, mirror3d1, unionall, viewtop, layerset, layerfreeze3) if N_SedBays == 1
    one ← stack(layer3, view, pline8, view, extrude1, mirror3d1, unionall, viewtop, arraybay2, layerset, layerfreeze3) if (N_SedBays > 1 and N_SedTanks ≥ 1)
    one ← stack(layer3, view, pline8, view, extrude1, mirror3d1, unionall, viewtop, arraybay1, layerset, layerfreeze3) otherwise
    return one
# pipe2_origin | pipe3_origin | pipe11_origin | pipe14_origin | pipe6_1ength | pipe7_length | pipe8_length | pipe13_length | pipe14_length
# pipe4_origin | pipe5_origin | pipe8_origin | pipe5_1ength
Sedbaydividerscript :=
    layer5 ← layer_new("sedbaydivider", grey)
    view ← viewtop1
    box1 ← box(SedBayDivider_Origin, SedBayDivider_Dim)
    move1 ← move_all([Plant_Origin[0]; SedBayDivider_Origin[1]; Plant_Origin[2]], [Plant_Origin[0]; (W_Sed - (N_SedBays - 1)*W_SedBayDivider)/N_SedBays; Plant_Origin[2]])
    arraybay1 ← concat("-array", sp, "ALL", sp, sp, "r", sp, stringit_nounits(N_SedBays - 1), sp, "1", sp, stringit((W_Sed - (N_SedBays - 1)*W_SedBayDivider)/N_SedBays + W_SedBayDivider))
    arraybay2 ← concat("-array", sp, "ALL", sp, sp, "r", sp, stringit_nounits(N_SedBays - 1), sp, "1", sp, stringit(-W_SedBay - W_SedBayDivider/2))
    layerset ← layer_set("0")
    layerfreeze5 ← layer_freeze("sedbaydivider")
    one ← stack(layer5, view, box1, layerset, layerfreeze5) if N_SedBays == 1
    one ← stack(layer5, view, box1, move1, arraybay1, layerset, layerfreeze5) if (N_SedBays > 1 and N_SedTanks ≥ 1)
    one ← stack(layer5, view, box1, arraybay2, layerset, layerfreeze5) otherwise
    return one
# pipe6_origin | pipe7_origin | pipe9_origin | pipe10_origin | pipe12_origin | pipe13_origin | pipe1_length
Z_SedManifoldPipe = 0.312909 m
H_SedSludge + T_SedSludge + S_SedManifoldBetween + outerdiameter(ND_SedManifold)/2 = 0.312909 m
iccoupling_origin := [-L_Sed + W_InletChannelEst/2; W_Sed - W_SedBayActual/2; H_Sed - H_InletChannel]
manifoldpipe_origin := [
    W_Sed - W_SedBayActual/2;
    H_SedSludge + T_SedSludge + S_SedManifoldBetween + outerdiameter(ND_SedManifold)/2;
    -L_Sed + W_InletChannelEst/2 + ElbowRadius(ND_SedManifold)
] = [2.55; 0.312909; -4.41182] m
[manifoldpipe_origin[2] + D_circle(A_SedManifoldPort)/2; W_SedBayActual/2; manifoldpipe_origin[1]] = [-4.39182; 0.45; 0.312909] m
[manifoldpipe_origin[2] - 3*zc; W_SedBayActual/2 - outerradius(ND_SedManifold) + zc] = [-4.44182; 0.298075] m
N_SedManifoldPorts = q  # error: This variable is undefined.
[manifoldpipe_origin[2] + L_SedManifoldPipe; W_SedBayActual/2 + outerradius(ND_SedManifold) + zc] = [0.4572; 0.621925] m
-L_Sed + W_InletChannelEst/2 + ElbowRadius(ND_SedManifold) = -4.41182 m
[manifoldpipe_origin[2]; W_SedBayActual/2; (manifoldpipe_origin[1] - OD_SedManifoldPipe/2) - zc] = [-4.41182; 0.45; 0.140984] m
manifoldelbow_origin := [
    -L_Sed + W_InletChannelEst/2;
    W_Sed - W_SedBayActual/2 - ElbowRadius(ND_SedManifold);
    H_SedSludge + T_SedSludge + S_SedManifoldBetween + outerdiameter(ND_SedManifold)/2
]
[manifoldpipe_origin[2]; W_SedBayActual/2 - outerradius(ND_SedManifold)] = [-4.41182; 0.288075] m
B_SedManifoldPort = 0.0848426 m
influentmanifoldscript :=
    viewtop ← viewtop1
    inletholeslayer ← layer_new("iccoupling", green)
    iccoupling ← couplingIDpipe(iccoupling_origin, ND_SedManifoldEntrance, T_ChannelWall - SocketDepth(ND_SedManifoldEntrance) + T_SedWeir, EN_PipeSpec)
    layerset ← layer_set("0")
    layerfreezechimneycoupling ← layer_freeze("iccoupling")
    viewright ← viewrightside1
    manpipelayer ← layer_new("manifoldpipe", blue)
    manpipe ← Pipe(manifoldpipe_origin, ND_SedManifold, L_SedManifoldPipe - ElbowRadius(ND_SedManifold), EN_PipeSpec)
    cylinder3 ← cylinderC([manifoldpipe_origin[2]; manifoldpipe_origin[0]; manifoldpipe_origin[1]], D_SedManifoldPort/2, -OD_SedManifoldPipe/2 - zc)
    array1 ← arrayB([manifoldpipe_origin[2] + D_SedManifoldPort/2; manifoldpipe_origin[0]; manifoldpipe_origin[1]], 1, N_SedManifoldPorts, B_SedManifoldPort)
    subtract2 ← subtractH([manifoldpipe_origin[2]; manifoldpipe_origin[0] - outerradius(ND_SedManifold)], [manifoldpipe_origin[2] - 3*zc; manifoldpipe_origin[0] - outerradius(ND_SedManifold) + zc], [
        manifoldpipe_origin[2] + L_SedManifoldPipe;
        manifoldpipe_origin[0] + outerradius(ND_SedManifold) + zc
    ])
    freezemanpip ← layer_freeze("manifoldpipe")
    viewtop ← viewtop1
    layermanifoldelbow ← layer_new("manifoldelbow", green)
    elbow ← elbow(manifoldelbow_origin, ND_SedManifoldEntrance, EN_PipeSpec)
    viewright ← viewrightside1
    rotateelbow ← rotate_All(manifoldpipe_origin, -90)
    viewtop ← viewtop1
    mirrorelbow ← mirror_allyes([manifoldelbow_origin[0] + ElbowRadius(ND_SedManifold); manifoldelbow_origin[1]], [manifoldelbow_origin[0] + ElbowRadius(ND_SedManifold); (2*manifoldelbow_origin)[1]])
    moveelbow ← move_all([
        -L_Sed + W_InletChannelEst/2 + ElbowRadius(ND_SedManifold);
        manifoldelbow_origin[1];
        manifoldelbow_origin[2]
    ], [-L_Sed + W_InletChannelEst/2; manifoldelbow_origin[1]; manifoldelbow_origin[2]])
    layerthawcoupling ← layer_thaw("iccoupling")
    layerthawmanifold ← layer_thaw("manifoldpipe")
    arraybay3 ← concat("-array", sp, "ALL", sp, sp, "r", sp, stringit_nounits(N_SedBays), sp, "1", sp, stringit(-W_SedBay - W_SedBayDivider/2))
    arraybay4 ← concat("-array", sp, "ALL", sp, sp, "r", sp, stringit_nounits(N_SedBays), sp, "1", sp, stringit(-((W_Sed - (N_SedBays - 1)*W_SedBayDivider)/N_SedBays + W_SedBayDivider)))
    layerset ← layer_set("0")
    layerfreezechimneycoupling ← layer_freeze("iccoupling")
    freezemanpipe ← layer_freeze("manifoldpipe")
    layerfreezeelbow ← layer_freeze("manifoldelbow")
    one ← stack(viewtop, inletholeslayer, iccoupling, layerset, layerfreezechimneycoupling, viewright, manpipelayer, manpipe, viewtop, cylinder3, array1, subtract2, layerset, freezemanpipe, viewtop, layermanifoldelbow, elbow, viewright, rotateelbow, viewtop, mirrorelbow, moveelbow, layerthawcoupling, layerthawmanifold, layerset, layerfreezechimneycoupling, freezemanpipe, layerfreezeelbow) if N_SedBays == 1
    one ← stack(viewtop, inletholeslayer, iccoupling, layerset, layerfreezechimneycoupling, viewright, manpipelayer, manpipe, viewtop, cylinder3, array1, subtract2, layerset, freezemanpipe, viewtop, layermanifoldelbow, elbow, viewright, rotateelbow, viewtop, mirrorelbow, moveelbow, layerthawcoupling, layerthawmanifold, arraybay4, layerset, layerfreezechimneycoupling, freezemanpipe, layerfreezeelbow) if (N_SedBays > 1 and N_SedTanks ≥ 1)
    one ← stack(viewtop, inletholeslayer, iccoupling, layerset, layerfreezechimneycoupling, viewright, manpipelayer, manpipe, viewtop, cylinder3, array1, subtract2, layerset, freezemanpipe, viewtop, layermanifoldelbow, elbow, viewright, rotateelbow, viewtop, mirrorelbow, moveelbow, layerthawcoupling, layerthawmanifold, arraybay3, layerset, layerfreezechimneycoupling, freezemanpipe, layerfreezeelbow) otherwise
    return one
inletpipescript :=
    layernew ← layer_new("inletpipe", blue)
    viewtop ← viewtop1
    pipe ← Pipe([iccoupling_origin[0]; iccoupling_origin[1]; manifoldelbow_origin[2] + ElbowRadius(ND_SedManifold)], ND_SedManifold, H_Sed - H_InletChannel - T_ChannelWall + SocketDepth(ND_SedManifold) - (manifoldelbow_origin[2] + ElbowRadius(ND_SedManifold)), EN_PipeSpec)
    arraybay3 ← concat("-array", sp, "ALL", sp, sp, "r", sp, stringit_nounits(N_SedBays), sp, "1", sp, stringit(-W_SedBay - W_SedBayDivider/2))
    arraybay4 ← concat("-array", sp, "ALL", sp, sp, "r", sp, stringit_nounits(N_SedBays), sp, "1", sp, stringit(-((W_Sed - (N_SedBays - 1)*W_SedBayDivider)/N_SedBays + W_SedBayDivider)))
    layerset ← layer_set("0")
    layerfreeze ← layer_freeze("inletpipe")
    one ← stack(layernew, viewtop, pipe, layerset, layerfreeze) if N_SedBays == 1
    one ← stack(layernew, viewtop, pipe, arraybay4, layerset, layerfreeze) if (N_SedBays > 1 and N_SedTanks ≥ 1)
    one ← stack(layernew, viewtop, pipe, arraybay3, layerset, layerfreeze) otherwise
Orificescript :=
    viewtops ← viewtop1
    layer1 ← layer_new("draincover", red)
    cylinder1 ← cylinderC([
        DrainCover_origin[0] + (-L_Sed) + B_SedSludgeOrifices;
        DrainCover_origin[1] + W_SedDrainCover/2;
        DrainCover_origin[2]
    ], D_SedSludgeOrifice/2, T_SedSludge)
    viewtops2 ← viewtop1
    cylinders ← array_all(1, N_SedSludgeOrifices, B_SedSludgeOrifices)
    union1 ← union_allA
    one ← stack(viewtops, layer1, cylinder1, cylinders, union1)
    return one
Draincoverscript :=
    viewtops ← viewtop1
    layerset2 ← layer_set("draincover")
    box1 ← box(DrainCover_origin, [
        DrainCover_origin[0] - L_Sed;
        DrainCover_origin[1] + W_SedDrainCover;
        DrainCover_origin[2] + T_SedSludge
    ])
    holes ← subtractD(DrainCover_origin, [
        DrainCover_origin[0] + (-L_Sed) + B_SedSludgeOrifices - D_SedSludgeOrifice/2;
        DrainCover_origin[1] + W_SedDrainCover/2;
        DrainCover_origin[2]
    ])
    arraybay1 ← concat("-array", sp, "ALL", sp, sp, "r", sp, stringit_nounits(N_SedBays), sp, "1", sp, stringit(W_SedBay + W_SedBayDivider/2))
    arraybay2 ← concat("-array", sp, "ALL", sp, sp, "r", sp, stringit_nounits(N_SedBays), sp, "1", sp, stringit((W_Sed - (N_SedBays - 1)*W_SedBayDivider)/N_SedBays + W_SedBayDivider))
    layerset ← layer_set("0")
    layerfreeze ← layer_freeze("draincover")
    one ← stack(viewtops, layerset2, box1, viewtops, holes, layerset, layerfreeze) if N_SedBays == 1
    one ← stack(viewtops, layerset2, box1, viewtops, holes, arraybay2, layerset, layerfreeze) if N_SedBays > 1 and N_SedTanks ≥ 1
    one ← stack(viewtops, layerset2, box1, viewtops, holes, arraybay1, layerset, layerfreeze) otherwise
    return one
Sedtanklaminascript :=
    layer7 ← layer_new("lamina", purple)
    lamina1 ←
        lamina(lamina_origin, Amp_SedPlate, W_Sed, L_SedPlate, T_SedPlate, Per_SedPlate, AN_SedPlate, N_SedPlates, N_SedPlateCol, B_SedPlateHorizontal, Y_SedPlate) if Baffle_complex == 1
        laminaplain1(lamina_origin, W_Sed, L_SedPlate, T_SedPlate, AN_SedPlate, N_SedPlates, N_SedPlateCol, B_SedPlateHorizontal) otherwise
    array2 ← array_all(N_SedTanks, 1, W_Sed)
    block1 ← block("laminablock", lamina_origin, lamina_origin)
    layerset1 ← layer_set("0")
    layerfreeze7 ← layer_freeze("lamina")
    one ← stack(layer7, lamina1, block1, layerset1, layerfreeze7)
    return one
FlocHopperScript :=
    layer1 ← layer_new("flochopper", green)
    viewtop ← viewtop1
    zoomin1 ← zoom_win([FlocHopper_origin[0]; FlocHopper_origin[1]], [50 m; 100 m])
    flochopper_box ← box(FlocHopper_origin, FlocHopperBox_dim)
    flochopper_wedge1 ← wedge(FlocHopper_origin, FlocHopperWedge_dim, H_FlocHopper)
    mirror_wedge ← mirrorD(FlocHopperWedge_dim, [FlocHopper_origin[0] + L_FlocHopper/2; FlocHopper_origin[1]], [FlocHopper_origin[0] + L_FlocHopper/2; T_FlocHopper])
    zoomin2 ← zoom_win([FlocHopper_origin[0]; FlocHopper_origin[1]], [2*FlocHopperBox_dim[0]; 2*FlocHopperBox_dim[1]])
    subtract_wedge1 ← subtractD([FlocHopperBox_dim[0]/2; FlocHopperBox_dim[1]; FlocHopperBox_dim[2]], [FlocHopperWedge_dim[0]; FlocHopperWedge_dim[1]/2; FlocHopper_origin[2]])
    subtract_wedge2 ← subtractD([FlocHopperBox_dim[0]/2; FlocHopperBox_dim[1]], [FlocHopperWedge_dim[0] + W_FlocHopper; FlocHopperWedge_dim[1]/2])
    rotate_flochopper1 ← rotate_3d(FlocHopperBox_dim, FlocHopper_origin, "z", 90)
    rotate_flochopper ← rotate_3d([FlocHopper_origin[0]; FlocHopper_origin[1]; H_FlocHopper], [FlocHopper_origin[0] + T_FlocHopper; FlocHopper_origin[1]; FlocHopper_origin[2]], "y", 90 - AN_FlocHopper)
    move_flochopper ← move_allD([
        -L_Sed + SedInletChimneyOuter_dim[0] + T_FlocHopper;
        W_SedBayActual*(N_SedBays - 1) + W_SedBayDivider*(N_SedBays - 1);
        SedDrainCover_dim[1]
    ])
    arraybay3 ← concat("-array", sp, "ALL", sp, sp, "r", sp, stringit_nounits(N_SedBays), sp, "1", sp, stringit(-W_SedBay - W_SedBayDivider/2))
    arraybay4 ← concat("-array", sp, "ALL", sp, sp, "r", sp, stringit_nounits(N_SedBays), sp, "1", sp, stringit(-((W_Sed - (N_SedBays - 1)*W_SedBayDivider)/N_SedBays + W_SedBayDivider)))
    layerset ← layer_set("0")
    layerfreeze ← layer_freeze("flochopper")
    one ← stack(layer1, viewtop, zoomin1, flochopper_box, flochopper_wedge1, mirror_wedge, zoomin2, subtract_wedge1, subtract_wedge2, rotate_flochopper1, rotate_flochopper, move_flochopper, layerset, layerfreeze) if N_SedBays == 1
    one ← stack(layer1, viewtop, zoomin1, flochopper_box, flochopper_wedge1, mirror_wedge, zoomin2, subtract_wedge1, subtract_wedge2, rotate_flochopper1, rotate_flochopper, move_flochopper, arraybay4, layerset, layerfreeze) if N_SedBays > 1 and N_SedTanks ≥ 1
    one ← stack(layer1, viewtop, zoomin1, flochopper_box, flochopper_wedge1, mirror_wedge, zoomin2, subtract_wedge1, subtract_wedge2, rotate_flochopper1, rotate_flochopper, move_flochopper, arraybay3, layerset, layerfreeze) otherwise
    return one  # error: This variable is undefined.
L_Sed - W_InletChannel - W_ExitChannel - 2*T_ChannelWall - 2*zc = 3.51225 m
Pipeframescript :=
    layer1 ← layer_new("pipeframe", yellow)
    view1 ← viewfront1
    cylinder1 ← cylinderC([pipeframe_origin[0] + B_SedPlateFramePipes; pipeframe_origin[1]; pipeframe_origin[2]], outerradius(ND_SedPlateFrame), -W_Sed)
    view2 ← viewtop1
    array1 ← array_all(1, floor(L_SedActive/B_SedPlateFramePipes), B_SedPlateFramePipes)
    view3 ← viewrightside1
    cylinder2 ← cylinderC([B_SedPlateFramePipes; pipeframe_origin[1] + 2*outerradius(ND_SedPlateFrame); pipeframe_origin[0]], outerradius(ND_SedPlateFrame), L_Sed - W_InletChannel - W_ExitChannel - 2*T_ChannelWall - 2*zc)
    numlength ← floor(W_Sed/B_SedPlateFramePipes) - 1
    arraybay7 ← arrayB([
        B_SedPlateFramePipes - outerradius(ND_SedPlateFrame);
        pipeframe_origin[1] + 2*outerradius(ND_SedPlateFrame);
        pipeframe_origin[0]
    ], 1, numlength, B_SedPlateFramePipes)
    union1 ← union_allA
    layerset1 ← layer_set("0")
    layerfreeze1 ← layer_freeze("pipeframe")
    one ← stack(layer1, view1, cylinder1, view2, array1, view3, cylinder2, arraybay7, union1, layerset1, layerfreeze1)
    one ← stack(layer1, view1, cylinder1, view2, array1, view3, cylinder2, arraybay7, union1, layerset1, layerfreeze1) if N_SedBays == 1
    one ← stack(layer1, view1, cylinder1, view2, array1, view3, cylinder2, arraybay7, union1, layerset1, layerfreeze1) otherwise
    return one
floor(1.2) = 1
(L_Sed - L_SedInactive) = 3.271 m
SedLaunderscript :=
    layernew1 ← layer_new("launder", blue)
    viewtop1 ← viewtop1
    win1 ← [
        SedLaunder_origin[0] - outerradius(ND_SedLaunder) - zc;
        SedLaunder_origin[1] - outerradius(ND_SedLaunder) - zc;
        SedLaunder_origin[2]
    ]
    win2 ← [
        (SedLaunder_origin[0] + outerradius(ND_SedLaunder)) + zc;
        SedLaunder_origin[1] + outerradius(ND_SedLaunder) + zc;
        SedLaunder_origin[2]
    ]
    zoom_win ← zoom_win(win1, win2)
    pipe1 ← Pipe(SedLaunder_origin, ND_SedLaunder, L_SedLaunder, EN_PipeSpec)
    cylinder3 ← cylinderD([
        SedLaunder_origin[0];
        SedLaunder_origin[1];
        SedLaunder_origin[2] + L_SedActive - B_SedLaunderOrificesReal/2
    ], D_SedLaunderOrifice/2, [
        SedLaunder_origin[0];
        SedLaunder_origin[1] + outerradius(ND_SedLaunder) + zc;
        SedLaunder_origin[2] + L_SedActive - B_SedLaunderOrificesReal/2
    ])
    viewrightside1 ← viewrightside1
    array1 ← arrayB([
        SedLaunder_origin[1] + outerradius(ND_SedLaunder) + zc;
        SedLaunder_origin[2] + L_SedActive - B_SedLaunderOrificesReal/2;
        SedLaunder_origin[0]
    ], N_SedLaunderOrificesRow, 1, -B_SedLaunderOrificesReal)
    subtract2 ← subtractH([SedLaunder_origin[0]; SedLaunder_origin[1] - outerradius(ND_SedLaunder)], [
        SedLaunder_origin[0] + D_SedLaunderOrifice + zc;
        SedLaunder_origin[1] + outerradius(ND_SedLaunder) + 2*zc
    ], [SedLaunder_origin[0] - D_SedLaunderOrifice - zc; SedLaunder_origin[1] - zc])
    cylinder4 ← cylinderD([
        SedLaunder_origin[0];
        SedLaunder_origin[1];
        SedLaunder_origin[2] + L_SedActive - B_SedLaunderOrificesReal/2
    ], D_SedLaunderOrifice/2, [
        SedLaunder_origin[0] + (outerradius(ND_SedLaunder)*cos(π/6)) + outerradius(ND_SedLaunder);
        SedLaunder_origin[1] + (outerradius(ND_SedLaunder)*sin(π/6)) + outerradius(ND_SedLaunder);
        SedLaunder_origin[2] + L_SedActive - B_SedLaunderOrificesReal/2
    ])
    array2 ← arrayB([
        SedLaunder_origin[1] + (outerradius(ND_SedLaunder)*sin(π/6)) + outerradius(ND_SedLaunder);
        SedLaunder_origin[2] + L_SedActive - B_SedLaunderOrificesReal/2
    ], N_SedLaunderOrificesRow, 1, -B_SedLaunderOrificesReal)
    holecylinder ← cylinderD(SedLaunder_origin, ND_SedLaunder, [SedLaunder_origin[0]; SedLaunder_origin[1]; SedLaunder_origin[2] + L_SedLaunder])
    subtract3 ← subtractH([SedLaunder_origin[0]; SedLaunder_origin[1] - outerradius(ND_SedLaunder)], [
        SedLaunder_origin[0] + (outerradius(ND_SedLaunder)*cos(π/3)) + 2*zc;
        SedLaunder_origin[0] + (outerradius(ND_SedLaunder)*sin(π/3)) + 2*zc
    ], [SedLaunder_origin[0]; SedLaunder_origin[1]])
    rotate1 ← rotate18 ← rotate_3d([
        SedLaunder_origin[0] + innerD(ND_SedLaunder, EN_PipeSpec)/2;
        SedLaunder_origin[1];
        SedLaunder_origin[2]
    ], SedLaunder_origin, "y", 90)
    rotate2 ← rotate_3d([
        SedLaunder_origin[0];
        SedLaunder_origin[1] + innerD(ND_SedLaunder, EN_PipeSpec)/2;
        SedLaunder_origin[2]
    ], SedLaunder_origin, "x", 120)
    viewtop2 ← viewtop1
    move1 ← move(SedLaunder_origin, SedLaunder_origin, [0; -SedLaunder_origin[1]/2; 0])
    bayarray1 ← array_all(N_SedLaunders*N_SedBays, 1, W_Sed/(N_SedLaunders*N_SedBays))
    arraywithinbay ← array_all(N_SedLaunders*N_SedBays, 1, (2*SedLaunder_origin)[1])
    arraybay4 ← concat("-array", sp, "ALL", sp, sp, "r", sp, stringit_nounits(N_SedBays), sp, "1", sp, stringit((W_Sed - (N_SedBays - 1)*W_SedBayDivider)/N_SedBays + W_SedBayDivider))
    arraybay2 ← concat("-array", sp, "ALL", sp, sp, "r", sp, stringit_nounits(N_SedBays), sp, "1", sp, stringit(W_SedBay + W_SedBayDivider/2))
    layerset1 ← layer_set("0")
    layerfreeze1 ← layer_freeze("launder")
    one ← stack(layernew1, viewtop1, zoom_win, pipe1, cylinder3, viewrightside1, array1, viewtop1, subtract2, viewtop1, zoom_win, cylinder4, viewrightside1, array2, viewtop1, subtract3, rotate1, rotate2, viewtop2, arraywithinbay, layerset1, layerfreeze1) if (N_SedTanks > 1 and N_SedBays > 1)
    one ← stack(layernew1, viewtop1, zoom_win, pipe1, cylinder3, viewrightside1, array1, viewtop1, subtract2, viewtop1, zoom_win, cylinder4, viewrightside1, array2, viewtop1, subtract3, rotate1, rotate2, viewtop2, arraywithinbay, layerset1, layerfreeze1) if N_SedBays == 1
    one ← stack(layernew1, viewtop1, zoom_win, pipe1, cylinder3, viewrightside1, array1, viewtop1, subtract2, viewtop1, zoom_win, cylinder4, viewrightside1, array2, viewtop1, subtract3, rotate1, rotate2, viewtop2, arraywithinbay, layerset1, layerfreeze1) otherwise
    return one
launderholes :=
    layernew1 ← layer_new("launderholes", blue)
    viewright ← viewrightside1
    cylinder1 ← cylinderD([SedLaunder_origin[1]; SedLaunder_origin[2]; -W_ExitChannel + zc], ND_SedLaunder/2, [SedLaunder_origin[1]; SedLaunder_origin[2]; -W_ExitChannel - T_ChannelWall - zc])
    arraywithinbay ← array_all(N_SedLaunders*N_SedBays, 1, (2*SedLaunder_origin)[1])
    arraybay2 ← concat("-array", sp, "ALL", sp, sp, "r", sp, stringit_nounits(N_SedBays), sp, "1", sp, stringit(W_SedBay + W_SedBayDivider/2))
    arraybay4 ← concat("-array", sp, "ALL", sp, sp, "r", sp, stringit_nounits(N_SedBays), sp, "1", sp, stringit((W_Sed - (N_SedBays - 1)*W_SedBayDivider)/N_SedBays + W_SedBayDivider))
    layerthaw1 ← layer_thaw("echannel")
    subtract1 ← subtractDall(echannel_origin)
    viewtop ← viewtop1
    layerset1 ← layer_set("0")
    one ← stack(layernew1, viewright, cylinder1, viewtop, arraywithinbay, layerthaw1, viewtop1, subtract1, layerset1)
Sedtankarrayscript :=
    layerthaw1 ← layer_thaw("tank")
    layerthaw2 ← layer_thaw("channel")
    layerthaw2e ← layer_thaw("echannel")
    layerthaw3 ← layer_thaw("bottomslopes")
    layerthaw4 ← layer_thaw("iccoupling")
    layerthaw5 ← layer_thaw("draincover")
    layerthaw6 ← layer_thaw("slopes")
    layerthaw7 ← layer_thaw("sedbaydivider")
    layerthaw8 ← layer_thaw("lamina")
    layerthaw9 ← layer_thaw("flochopper")
    layerthaw10 ← layer_thaw("pipeframe")
    layerthaw11 ← layer_thaw("launder")
    layerthaw12 ← layer_thaw("chimneycoupling")
    layerthaw13 ← layer_thaw("chimney stops")
    layerthaw14 ← layer_thaw("manifoldpipe")
    layerthaw15 ← layer_thaw("manifoldelbow")
    layerthaw16 ← layer_thaw("inletpipe")
    viewtop ← viewtop1
    arraytank1 ← concat("-array", sp, "ALL", sp, sp, "r", sp, stringit_nounits(N_SedTanks), sp, "1", sp, stringit(W_Sed + T_PlantWall))
    layerfreeze13 ← layer_freeze("tank")
    layerfreeze14 ← layer_freeze("channel")
    layerfreeze15 ← layer_freeze("echannel")
    layerfreeze16 ← layer_freeze("bottomslopes")
    layerfreeze17 ← layer_freeze("iccoupling")
    layerfreeze18 ← layer_freeze("draincover")
    layerfreeze19 ← layer_freeze("slopes")
    layerfreeze20 ← layer_freeze("sedbaydivider")
    layerfreeze21 ← layer_freeze("lamina")
    layerfreeze22 ← layer_freeze("flochopper")
    layerfreeze23 ← layer_freeze("pipeframe")
    layerfreeze24 ← layer_freeze("launder")
    layerfreeze25 ← layer_freeze("chimneycoupling")
    layerfreeze26 ← layer_freeze("chimney stops")
    layerfreeze27 ← layer_freeze("manifoldpipe")
    layerfreeze28 ← layer_freeze("manifoldelbow")
    layerfreeze29 ← layer_freeze("inletpipe")
    bigunion ← union_allA
    layerset ← layer_set("0")
    one ← stack(layerthaw1, layerthaw2, layerthaw2e, layerthaw3, layerthaw4, layerthaw5, layerthaw6, layerthaw7, layerthaw8, layerthaw9, layerthaw10, layerthaw11, layerthaw12, layerthaw13, layerthaw14, layerthaw15, layerthaw16)
    two ← stack(viewtop, arraytank1)
    three ← stack(layerfreeze13, layerfreeze14, layerfreeze15, layerfreeze16, layerfreeze17, layerfreeze18, layerfreeze19, layerfreeze20, layerfreeze21, layerfreeze22, layerfreeze23, layerfreeze24, layerfreeze25, layerfreeze26, layerfreeze27, layerfreeze28, layerfreeze29, bigunion, layerset, layerthaw2, bigunion, layerset, layerfreeze14, layerthaw2e, bigunion, layerset, layerfreeze15)
    return stack(one, two, three)
Sedtankopenchannelscript :=
    layerthawtank ← layer_thaw("tank")
    layerthawchannel ← layer_thaw("channel")
    viewtop1 ← viewtop1
    box1 ← box(channelbox_origin, [
        channelbox_origin[0] + channelbox_dim[0];
        channelbox_origin[1] + channelbox_dim[1];
        channelbox_origin[2] + channelbox_dim[2]
    ])
    subtract1 ← subtractD(Plant_Origin, channelbox_origin)
    box2 ← box(echannelbox_origin, [
        echannelbox_origin[0] + echannelbox_dim[0];
        echannelbox_origin[1] + echannelbox_dim[1];
        echannelbox_origin[2] + echannelbox_dim[2]
    ])
    subtract2 ← subtractD([Plant_Origin[0] + T_PlantWall; Plant_Origin[1]; Plant_Origin[2]], echannelbox_origin)
    layerset1 ← layer_set("channel")
    box3 ← box(channelclosebox_origin, channelclosebox_origin + channelclosebox_dim)
    bigunion ← union_allA
    layerset ← layer_set("0")
    layerfreezechannel ← layer_freeze("channel")
    layerfreezetank ← layer_freeze("tank")
    one ← stack(layerthawtank, viewtop1, bigunion, box1, subtract1, box2, subtract2, layerset, layerfreezetank)
    return one
exitweirpipe_length := H_Sed - H_ExitChannel + H_PltWeir - ElbowRadius(ND_PltWeir) - ConRadius(ND_PltWeir)
connectingpipe_length := L_Sed
sedtankconnectingpipe_origin :=
    if sedlayout == 2
        origin ← [
            Plant_Origin[0] - SocketDepth(ND_PltWeir) - 2*ElbowRadius(ND_PltWeir);
            Plant_Origin[1] - T_PlantWall - S_Elbow - ConRadius(ND_PltWeir);
            Plant_Origin[2] + ConRadius(ND_PltWeir)
        ]
    return ← origin
sedechanneltankscript :=
    viewtope ← viewtop1
    layernewect ← layer_new("echanneltank", ltgrey)
    tankect ← Tank(echanneltank_origin, echanneltank_dim, T_PlantWall)
    boxect ← box(echannelbox_origin, echannelbox_origin + echannelbox_dim)
    subtractect ← subtractD(echanneltank_origin, echannelbox_origin)
    layerset ← layer_set("0")
    layerfreezeect ← layer_freeze("echanneltank")
    layernewewe ← layer_new("exitweirelbow", green)
    elbowewe ← elbow(sedtankexitweirelbow_origin, ND_PltWeir, EN_PipeSpec)
    rotateewe1 ← rotate_3d([
        sedtankexitweirelbow_origin[0] + ElbowRadius(ND_PltWeir);
        sedtankexitweirelbow_origin[1];
        sedtankexitweirelbow_origin[2] - outerradius(ND_PltWeir)
    ], sedtankexitweirelbow_origin, "y", 90)
    rotateewe2 ← rotate_3d([
        sedtankexitweirelbow_origin[0];
        sedtankexitweirelbow_origin[1] + ElbowRadius(ND_PltWeir) - outerradius(ND_PltWeir);
        sedtankexitweirelbow_origin[2]
    ], sedtankexitweirelbow_origin, "z", 270)
    elbowewe2 ← elbow(sedtankexitweirelbow2_origin, ND_PltWeir, EN_PipeSpec)
    rotateewe21 ← rotate_3d([
        sedtankexitweirelbow2_origin[0] + ElbowRadius(ND_PltWeir);
        sedtankexitweirelbow2_origin[1];
        sedtankexitweirelbow2_origin[2] - outerradius(ND_PltWeir)
    ], sedtankexitweirelbow2_origin, "y", 90)
    rotateewe22 ← rotate_3d([
        sedtankexitweirelbow2_origin[0];
        sedtankexitweirelbow2_origin[1] + ElbowRadius(ND_PltWeir) - outerradius(ND_PltWeir);
        sedtankexitweirelbow2_origin[2]
    ], sedtankexitweirelbow2_origin, "z", 90)
    layerfreezeewe ← layer_freeze("exitweirelbow")
    layernewewp ← layer_new("exitweir", blue)
    pipeewp ← Pipe(exitweirpipe_origin, ND_PltWeir, exitweirpipe_length, EN_PipeSpec)
    copyewp ← copyB(exitweirpipecopy1_point, exitweirpipecopy1_point, exitweirpipecopy2_point)
    layerfreezeewp ← layer_freeze("exitweir")
    layernewconnpipe ← layer_new("connecting pipe", blue)
    pipecon ← Pipe(sedtankconnectingpipe_origin, ND_PltWeir, connectingpipe_length, EN_PipeSpec)
    rotatepipecon ← rotate_3d([
        sedtankconnectingpipe_origin[0] + outerradius(ND_PltWeir);
        sedtankconnectingpipe_origin[1];
        sedtankconnectingpipe_origin[2] + connectingpipe_length
    ], sedtankconnectingpipe_origin, "y", 270)
    layerfreezepipecon ← layer_freeze("connecting pipe")
    one ← stack(viewtope, layernewect, tankect, boxect, subtractect, layerset, layerfreezeect, layernewewe, elbowewe, rotateewe1, rotateewe2, elbowewe2, rotateewe21, rotateewe22, layerset, layerfreezeewe, layernewewp, pipeewp, copyewp, layerset, layerfreezeewp, layernewconnpipe, pipecon, rotatepipecon, layerset, layerfreezepipecon)
    return one
    = [
        "_-view o t";
        "-layer m echanneltank";
        "c t 214,214,214";
        "echanneltank";
        "  ";
        "_-view o t _zoom w 0.16,-1.23724,0.94453 -0.93751,0.01,1.51364 _box 0,-1.07724,0.94453 -0.77751,-0.15,1.51364 _box 0.15,-1.22724,0.79453 -0.92751,0,1.51364 _subtract 0.15,-1.22724,0.79453  0,-1.07724,0.94453 ";
        "_box -0.51551,-0.15,0.94453 0,12.45,1.51364";
        "_subtract 0,-1.07724,0.94453  -0.51551,-0.15,0.94453 ";
        "-layer s 0";
        "  "
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    ]
sedichanneltankscript :=
    viewtopi ← viewtop1
    layernewict ← layer_new("ichanneltank", ltgrey)
    tankict ← Tank(ichanneltank_origin, ichanneltank_dim, T_PlantWall)
    boxict ← box(channelbox_origin, channelbox_origin + channelbox_dim)
    subtractict ← subtractD(ichanneltank_origin, channelbox_origin)
    layerset ← layer_set("0")
    layerfreezeict ← layer_freeze("ichanneltank")
    layernewiwt ← layer_new("inletweirtee", green)
    teeiwt ← Tee2(sedtankinletweirelbow_origin, ND_PltWeir, EN_PipeSpec)
    rotateiwt1 ← rotate_3d([
        sedtankinletweirelbow_origin[0] + outerradius(ND_PltWeir);
        sedtankinletweirelbow_origin[1];
        sedtankinletweirelbow_origin[2] - outerradius(ND_PltWeir)
    ], sedtankinletweirelbow_origin, "y", 90)
    rotateiwt2 ← rotate_3d([
        sedtankinletweirelbow_origin[0];
        sedtankinletweirelbow_origin[1] + ElbowRadius(ND_PltWeir) - outerradius(ND_PltWeir);
        sedtankinletweirelbow_origin[2]
    ], sedtankinletweirelbow_origin, "z", 90)
    layerfreezeiwt ← layer_freeze("inletweirtee")
    layernewiwp ← layer_new("inletweir", blue)
    viewtopi ← viewtop1
    pipeiwp ← Pipe(inletweirpipe_origin, ND_PltWeir, inletweirpipe_length, EN_PipeSpec)
    layerfreezeiwp ← layer_freeze("inletweir")
    one ← stack(viewtopi, layernewict, tankict, boxict, subtractict, layerset, layerfreezeict, layernewiwt, teeiwt, rotateiwt1, layerset, layerfreezeiwt, layernewiwp, viewtopi, pipeiwp, layerset, layerfreezeiwp)
    return one
Q_Plant = 50 L/s
text := textbox(H_Text, textbox_origin, textbox_origin + textbox_dim, Disclaimer) = ["textsize 0.05"; "-mtext -10.28571,1 -7.71429,2 Disclaimer: This drawing is a PRELIMINARY DESIGN and should be reviewed by a professional engineer."; ""]
AC_SedTank :=
    stack(Sedtanktankscript, Sedtanksubtractchannelscript, Sedtankexitchannelscript, Sedtankexitweirscript, Sedtankinletweirscript, Sedtankinletchannelscript, Sedbottomslopescript, Sedbaydividerscript, influentmanifoldscript, inletpipescript, Orificescript, Draincoverscript, Sedtanklaminascript, Pipeframescript, SedLaunderscript, launderholes, Sedtankarrayscript, Sedtankopenchannelscript, sedichanneltankscript, sedechanneltankscript, text) if (N_SedBays > 1 and N_SedTanks > 1)
    stack(Sedtanktankscript, Sedtanksubtractchannelscript, Sedtankexitchannelscript, Sedtankexitweirscript, Sedtankinletweirscript, Sedtankinletchannelscript, Sedbottomslopescript, influentmanifoldscript, inletpipescript, Orificescript, Draincoverscript, Sedtanklaminascript, Pipeframescript, SedLaunderscript, launderholes, Sedtankarrayscript, Sedtankopenchannelscript, sedichanneltankscript, sedechanneltankscript, text) if (N_SedBays ≤ 1 and N_SedTanks > 1)
    stack(Sedtanktankscript, Sedtanksubtractchannelscript, Sedtankexitchannelscript, Sedtankexitweirscript, Sedtankinletweirscript, Sedtankinletchannelscript, Sedbottomslopescript, influentmanifoldscript, inletpipescript, Orificescript, Draincoverscript, Sedtanklaminascript, Pipeframescript, SedLaunderscript, launderholes, Sedtankopenchannelscript, sedichanneltankscript, sedechanneltankscript, text) if (N_SedBays == 1 and N_SedTanks == 1)
    stack(Sedtanktankscript, Sedtanksubtractchannelscript, Sedtankexitchannelscript, Sedtankexitweirscript, Sedtankinletweirscript, Sedtankinletchannelscript, Sedbottomslopescript, Sedbaydividerscript, influentmanifoldscript, inletpipescript, Orificescript, Draincoverscript, Sedtanklaminascript, Pipeframescript, SedLaunderscript, launderholes, Sedtankopenchannelscript, sedichanneltankscript, sedechanneltankscript, text) if (N_SedBays > 1 and N_SedTanks == 1)
# [component: inputs AC_SedTank]
