# [reference: MasterProgram.xmcd]
# Automated Design: AutoCAD: Sedimentation Tank
# Dimension Values
channelbox_dim :=
    dim ← [W_InletChannel; (N_SedTanks*W_Sed) + ((N_SedTanks + 1)*T_PlantWall); H_InletChannel] if sedlayout == 2
    dim ← [W_InletChannel; N_SedTanks*(W_Sed + T_PlantWall); H_InletChannel] if sedlayout == 3
    return dim
echannelbox_dim := [W_ExitChannel; N_SedTanks*(W_Sed + T_PlantWall); H_ExitChannel]
channelinletbox1_dim := [T_PlantWall; W_InletChannel + T_PlantWall; H_InletChannel]
channelinletbox2_dim := [W_InletChannel; W_Sed; H_Sed]
sedbottombox_dim := [-L_Sed; W_Sed; T_PlantWall]
channelclosebox_dim := [W_InletChannel + T_ChannelWall + T_PlantWall; T_PlantWall; H_InletChannel + T_ChannelWall]
channelinletwall_dim := [T_ChannelWall; W_Sed; H_Sed]
# The minimum function ensures that the control box is at least as wide as the channel that it is connected to. If need be it can be even wider if the plumbing connections require it to be wider.
echanneltank_dim := [W_ExitChannel; 4*ConRadius(ND_PltWeir) + 3*S_Elbow; H_ExitChannel]
echanneltankbox_dim := [
    -W_ExitChannel;
    4*ConRadius(ND_PltWeir) + 3*S_Elbow;
    ConRadius(ND_PltWeir) + ElbowRadius(ND_PltWeir) + SocketDepth(ND_PltWeir)
]  # I replaced
S_Elbow + ElbowRadius(ND_PltWeir) + ConRadius(ND_PltWeir) + SocketDepth(ND_PltWeir)
ichanneltank_dim := [W_InletChannel; (2*ConRadius(ND_PltWeir)) + (2*S_Elbow); H_InletChannel]
with
W_InletChannel
# W_ExitChannel | or
# in the four functions at the left.
ichanneltankbox_dim := [
    -W_InletChannel;
    (2*ConRadius(ND_PltWeir)) + (2*S_Elbow);
    ConRadius(ND_PltWeir) + ElbowRadius(ND_PltWeir) + SocketDepth(ND_PltWeir)
]
framewall_dim := [-L_Sed; T_ConcreteMin; -H_SedFrameWall]  # error: This variable is undefined.
textbox_dim := [L_Sed/2; W_SedBay]
sedweirexit_dim := [W_SedWeirExit; H_SedWeirExit; T_SedWeir] = [9.23; 0.280008; 0.04] m
sedweirinlet_dim := [W_SedWeirInlet; H_SedWeirInlet; T_SedWeir] = [9.23; 0.320008; 0.04] m
seddrainslope_dim := [sqrt(3)*H_SedSlope; D_SedDrainValve; -H_SedSlope]
# Origins Points
channel_origin := [
    Plant_Origin[0] - L_Sed + W_InletChannel;
    Plant_Origin[1] - T_PlantWall;
    Plant_Origin[2] + H_Sed - H_InletChannel
] = [-3.03555; -0.15; 1.39455] m
echannel_origin :=
    origin ← [0; 0; 0]*m
    origin ← [Plant_Origin[0]; Plant_Origin[1] - T_PlantWall; Plant_Origin[2] + H_Sed - H_ExitChannel] if sedlayout == 2
    if sedlayout == 3
        origin ← [
            Plant_Origin[0] - L_Sed + W_InletChannel + T_ChannelWall + W_ExitChannel;
            Plant_Origin[1] - T_PlantWall;
            Plant_Origin[2] + H_Sed - H_ExitChannel
        ]
    if sedlayout == 4
        origin ← [
            Plant_Origin[0] - L_Sed + W_InletChannel + T_ChannelWall + W_ExitChannel;
            Plant_Origin[1] - T_PlantWall;
            Plant_Origin[2] + H_Sed - H_ExitChannel
        ]
    return origin
channelinletwall_origin := [Plant_Origin[0] - L_Sed + W_InletChannel; Plant_Origin[1]; Plant_Origin[2]]
isubtractbox_origin := [Plant_Origin[0] - L_Sed + W_InletChannel; Plant_Origin[1]; Plant_Origin[2] + H_Sed]
echanneltank_origin :=
    if sedlayout == 2
        origin ← [
            Plant_Origin[0];
            Plant_Origin[1] - T_PlantWall - (4*ConRadius(ND_PltWeir)) - (3*S_Elbow);
            Plant_Origin[2] + H_Sed - H_ExitChannel
        ]
    if sedlayout == 3
        origin ← [
            Plant_Origin[0] - L_Sed + W_InletChannel + T_ChannelWall + S_Elbow + ElbowRadius(ND_PltWeir) + ConRadius(ND_PltWeir) + SocketDepth(ND_PltWeir);
            Plant_Origin[1] - T_PlantWall - (4*ConRadius(ND_PltWeir)) - (3*S_Elbow);
            Plant_Origin[2] + H_Sed - H_ExitChannel
        ]
    origin
ichanneltank_origin :=
    if sedlayout == 2
        origin ← [
            Plant_Origin[0] - L_Sed - T_PlantWall + ichanneltank_dim[0] + T_PlantWall;
            Plant_Origin[1] - T_PlantWall - (2*ConRadius(ND_PltWeir)) - (2*S_Elbow);
            Plant_Origin[2] + H_Sed - H_InletChannel
        ]
    if sedlayout == 3
        origin ← [
            (Plant_Origin[0] - L_Sed + W_InletChannel) + T_ChannelWall;
            Plant_Origin[1] - T_PlantWall - (2*ConRadius(ND_PltWeir)) - (2*S_Elbow);
            Plant_Origin[2] + H_Sed - H_InletChannel
        ]
    origin
    = [-3.03555; -0.45193; 1.39455] m
channelbox_origin := [Plant_Origin[0] - L_Sed; Plant_Origin[1] - T_PlantWall; Plant_Origin[2] + H_Sed - H_InletChannel]
echannelbox_origin :=
    origin ← [0; 0; 0]*m
    if sedlayout == 2
        origin ← [
            Plant_Origin[0] - W_ExitChannel;
            Plant_Origin[1] - T_PlantWall;
            Plant_Origin[2] + H_Sed - H_ExitChannel
        ]
    if sedlayout == 3
        origin ← [
            Plant_Origin[0] - L_Sed + W_InletChannel + T_ChannelWall;
            Plant_Origin[1] - T_PlantWall;
            Plant_Origin[2] + H_Sed - H_ExitChannel
        ]
    if sedlayout == 4
        origin ← [
            Plant_Origin[0] - L_Sed + W_InletChannel + T_ChannelWall;
            Plant_Origin[1] - T_PlantWall;
            Plant_Origin[2] + H_Sed - H_ExitChannel
        ]
    return origin
channelinletbox1_origin := [
    Plant_Origin[0] - L_Sed - T_PlantWall;
    Plant_Origin[1] + (.5*W_Sed) - (.5*W_InletChannel + T_PlantWall);
    Plant_Origin[2] + H_Sed - H_InletChannel
]
channelinletbox2_origin := [Plant_Origin[0] - L_Sed; Plant_Origin[1]; Plant_Origin[2]]
channelclosebox_origin := [
    Plant_Origin[0] - L_Sed - T_PlantWall - W_InletChannel - T_ChannelWall;
    Plant_Origin[1] - T_PlantWall;
    Plant_Origin[2] + H_Sed - H_InletChannel - T_ChannelWall
]
sedtankexitweirelbow_origin := [
    Plant_Origin[0] - L_Sed + (S_Elbow + ConRadius(ND_PltWeir)) + ElbowRadius(ND_PltWeir);
    Plant_Origin[1] - T_PlantWall - S_Elbow - ConRadius(ND_PltWeir);
    Plant_Origin[2] + ElbowRadius(ND_PltWeir)
]  # switched origin points for Marcala/El Chiflador
sedtankinletweirelbow_origin :=
    if sedlayout == 2
        origin ← [
            Plant_Origin[0] - SocketDepth(ND_PltWeir) - ElbowRadius(ND_PltWeir);
            Plant_Origin[1] - T_PlantWall - S_Elbow - ConRadius(ND_PltWeir);
            Plant_Origin[2] - ShortTeeLength(ND_PltWeir)
        ]
    if sedlayout == 3
        origin ← [
            Plant_Origin[0] - L_Sed + W_InletChannel + T_ChannelWall + echanneltank_dim[0] - SocketDepth(ND_PltWeir);
            Plant_Origin[1] - T_PlantWall - S_Elbow - ConRadius(ND_PltWeir);
            Plant_Origin[2] - ShortTeeLength(ND_PltWeir)
        ]
    return ← origin
# this is actually a TEE
sedtankexitweirelbow2_origin :=
    if sedlayout == 2
        origin ← [
            Plant_Origin[0] - SocketDepth(ND_PltWeir);
            Plant_Origin[1] - T_PlantWall - 2*S_Elbow - 3*ConRadius(ND_PltWeir);
            Plant_Origin[2] + ElbowRadius(ND_PltWeir)
        ]
    if sedlayout == 3
        origin ← [
            Plant_Origin[0] - L_Sed + W_InletChannel + T_ChannelWall + echanneltank_dim[0] - SocketDepth(ND_PltWeir);
            Plant_Origin[1] - T_PlantWall - S_Elbow - ConRadius(ND_PltWeir);
            Plant_Origin[2] + ElbowRadius(ND_PltWeir)
        ]
    return ← origin
exitweirpipe2_origin :=
    if sedlayout == 2
        origin ← [
            Plant_Origin[0] - ElbowRadius(ND_PltWeir) - SocketDepth(ND_PltWeir);
            Plant_Origin[1] - T_PlantWall - 2*S_Elbow - 3*ConRadius(ND_PltWeir);
            Plant_Origin[2] + ElbowRadius(ND_PltWeir)
        ]
    if sedlayout == 3
        origin ← [
            Plant_Origin[0] - L_Sed + W_InletChannel + T_ChannelWall + S_Elbow + ConRadius(ND_PltWeir);
            Plant_Origin[1] - T_PlantWall - S_Elbow - ConRadius(ND_PltWeir);
            Plant_Origin[2] + ElbowRadius(ND_PltWeir)
        ]
    return ← origin
exitweirpipecopy1_point :=
    if sedlayout == 2
        point ← [
            Plant_Origin[0] - SocketDepth(ND_PltWeir) - ElbowRadius(ND_PltWeir) - innerR(ND_PltWeir, EN_PipeSpec);
            Plant_Origin[1] - T_PlantWall - S_Elbow - ConRadius(ND_PltWeir);
            Plant_Origin[2] + ElbowRadius(ND_PltWeir)
        ]
    if sedlayout == 3
        point ← [
            Plant_Origin[0] - L_Sed + W_InletChannel + T_ChannelWall + echanneltank_dim[0] - SocketDepth(ND_PltWeir) - ElbowRadius(ND_PltWeir) - innerR(ND_PltWeir, EN_PipeSpec);
            Plant_Origin[1] - T_PlantWall - S_Elbow - ConRadius(ND_PltWeir);
            Plant_Origin[2] + ElbowRadius(ND_PltWeir)
        ]
    return point
exitweirpipecopy2_point :=
    if sedlayout == 2
        point ← [
            Plant_Origin[0] - SocketDepth(ND_PltWeir) - ElbowRadius(ND_PltWeir) - innerR(ND_PltWeir, EN_PipeSpec);
            Plant_Origin[1] - T_PlantWall - 2*S_Elbow - 3*ConRadius(ND_PltWeir);
            Plant_Origin[2] + ElbowRadius(ND_PltWeir)
        ]
    if sedlayout == 3
        point ← [
            Plant_Origin[0] - L_Sed + W_InletChannel + T_ChannelWall + echanneltank_dim[0] - SocketDepth(ND_PltWeir) - ElbowRadius(ND_PltWeir) - innerR(ND_PltWeir, EN_PipeSpec);
            Plant_Origin[1] - T_PlantWall - 2*S_Elbow - 3*ConRadius(ND_PltWeir);
            Plant_Origin[2] + ElbowRadius(ND_PltWeir)
        ]
    return point
ElbowRadius(ND_PltWeir) = 0.2286 m
sedtankinletpipe1_origin := [
    Plant_Origin[0] - L_Sed + (.5*W_InletChannel);
    Plant_Origin[1] + (W_Sed/(2*N_SedInletPipes*N_SedBays));
    Plant_Origin[2] + H_Sed - H_InletChannel
]
inletweirpipe_origin := [
    Plant_Origin[0] - L_Sed + S_Elbow + ConRadius(ND_PltWeir);
    Plant_Origin[1] - T_PlantWall - S_Elbow - ConRadius(ND_PltWeir);
    Plant_Origin[2] + ElbowRadius(ND_PltWeir)
] = [-3.41362; -0.300965; 0.2286] m
sedtankinletweirelbow_origin = [-0.2856; -0.300965; -0.142875] m
Plant_Origin[2] + ShortTeeLength(ND_PltWeir)
exitweirpipe_origin :=
    if sedlayout == 2
        origin ← [
            Plant_Origin[0] - ElbowRadius(ND_PltWeir) - SocketDepth(ND_PltWeir);
            Plant_Origin[1] - T_PlantWall - S_Elbow - ConRadius(ND_PltWeir);
            Plant_Origin[2] + ShortTeeLength(ND_PltWeir)
        ]
    if sedlayout == 3
        origin ← [
            Plant_Origin[0] - L_Sed + W_InletChannel + T_ChannelWall + S_Elbow + ConRadius(ND_PltWeir);
            Plant_Origin[1] - T_PlantWall - S_Elbow - ConRadius(ND_PltWeir);
            Plant_Origin[2] + ShortTeeLength(ND_PltWeir)
        ]
    return ← origin
Sedbottomslopes_origin := [0; 0; 0]
Sedbottomslopes_dim := [
    Sedbottomslopes_origin[0] + W_SedBay;
    Sedbottomslopes_origin[1] + H_SedSludge + T_SedSludge;
    Sedbottomslopes_origin[2] + L_Sed
]
Sedbottomslopes_dim[0]/2 - W_SedSludge/2 = 0.481832 m
SedDrain_origin := [
    Sedbottomslopes_origin[0] + Sedbottomslopes_dim[0]/2 - W_SedSludge/2;
    Sedbottomslopes_origin[1];
    Sedbottomslopes_origin[2]
]
SedDrain_dim := [SedDrain_origin[0] + W_SedSludge; SedDrain_origin[1] + H_SedSludge; SedDrain_origin[2] + L_Sed]
W_SedInletBottom = 0.431832 m
SedDrainCover_origin := [
    Sedbottomslopes_origin[0] + Sedbottomslopes_dim[0]/2 - W_SedDrainCover/2;
    Sedbottomslopes_origin[1] + H_SedSludge;
    Sedbottomslopes_origin[2]
]
SedDrainCover_dim := [
    SedDrainCover_origin[0] + W_SedDrainCover;
    SedDrainCover_origin[1] + T_SedSludge;
    SedDrainCover_origin[2] + L_Sed
]
Sedbottomslopeslope_origin := [
    Sedbottomslopes_origin[0] + W_SedInletBottom;
    Sedbottomslopes_origin[1] + Sedbottomslopes_dim[1];
    Sedbottomslopes_origin[2]
] = [0.431832; 0.0981679; 0] m
SedTankDivider_Origin := [Plant_Origin[0]; Plant_Origin[1] + W_Sed; Plant_Origin[2]]
SedTankDivider_Dim := [
    SedTankDivider_Origin[0] - L_Sed;
    SedTankDivider_Origin[1] + T_PlantWall;
    SedTankDivider_Origin[2] + H_SedBayDivider
] = [-3.56459; 2.27; 0.802822] m
DrainCover_origin := [Plant_Origin[0]; Plant_Origin[1] + W_SedInletBottom; Plant_Origin[2] + H_SedSludge] = [0; 0.431832; 0.0481679] m
iccoupling_origin := [-L_Sed + W_InletChannelEst/2; W_Sed - (W_SedBay/2); H_Sed - H_InletChannel] = [-3.39869; 1.59; 1.39455] m
manifoldpipe_origin := [
    W_Sed - (W_SedBay/2);
    Z_SedManifoldPipe;
    -L_Sed + W_InletChannelEst/2 + ElbowRadius(ND_SedManifold)
] = [1.59; 0.199133; -3.17009] m
manifoldelbow_origin := [-L_Sed + W_InletChannelEst/2; W_Sed - W_SedBay/2 - ElbowRadius(ND_SedManifold); Z_SedManifoldPipe]
lamina_origin := [
    Plant_Origin[0] - L_Sed + W_InletChannel + T_ChannelWall + L_SedPlate*cos(AN_SedPlate);
    Plant_Origin[1];
    Plant_Origin[2] + H_SedBayDivider + outerdiameter(ND_SedPlateFrame)
] = [-2.51975; 0; 0.851082] m  # These are the assumed dimensions for the frame that supports the lamella, they should probably be defined somewhere else.
pipeframe_origin := [
    Plant_Origin[0] - L_Sed + W_InletChannel + L_SedPlate*cos(AN_SedPlate) + T_ChannelWall - 2*zc;
    H_SedBayDivider + outerdiameter(ND_SedPlateFrame)/2;
    Plant_Origin[2]
]
SedLaunder_origin := [
    Plant_Origin[0] - W_ExitChannel - T_ChannelWall - L_SedLaunder + SocketDepth(ND_SedLaunder);
    Plant_Origin[1] + W_Sed/(N_SedLaunders*N_SedBays*2);
    Plant_Origin[2] + HW_Sed - H_SedAbove + outerradius(ND_SedLaunder)
] = [-2.82855; 0.53; 1.63182] m
SedLaunderOrifice_origin := [SedLaunder_origin[0]; SedLaunder_origin[1]; SedLaunder_origin[2] + L_Sed - B_SedLaunderOrifices]
textbox_origin := [-2*L_Sed; W_SedBay]
sedweirexit_origin := [
    {
        -W_ExitChannel if Geom_ExitChannel == Perpindicular_Weir
        -T_PlantWall otherwise
    };
    H_Sed - H_ExitChannel;
    {
        T_PlantWall - T_SedWeir if Geom_ExitChannel == Perpindicular_Weir
        -w_minchannelHL(H_SedWeirExit, HW_ExitChannel, Q_Plant, L_Channel, Nu_Water, E_Concrete, 1, HL_SedWeirExit) - T_SedWeir otherwise
    }
]
sedweirinlet_origin := [
    {
        -L_Sed if EN_InletChannelGeom == Perpindicular_Weir
        -T_PlantWall otherwise
    };
    H_Sed - H_InletChannel;
    {
        T_PlantWall - T_SedWeir if EN_InletChannelGeom == Perpindicular_Weir
        -L_Sed + W_InletChannelEst otherwise
    }
]
FlocHopper_origin := [0; 0; 0]
FlocHopperBox_dim := [L_FlocHopper; T_FlocHopper; H_FlocHopper]  # error: This variable is undefined.
FlocHopperWedge_dim := [(L_FlocHopper - W_FlocHopper)/2; T_FlocHopper; FlocHopper_origin[2]]  # error: This variable is undefined.
isubractbox_dim := [W_InletChannel; T_PlantWall; H_InletChannel]
inletweirpipe_length := H_Sed - H_InletChannel + HW_InletChannel - ElbowRadius(ND_PltWeir) - ConRadius(ND_PltWeir) = 1.39679 m
exitweirpipe_length := H_Sed - H_ExitChannel + H_PltWeir - ShortTeeLength(ND_PltWeir) - ConRadius(ND_PltWeir) = 1.49252 m
connectingpipe_length := -((Plant_Origin[0] - L_Sed + S_Elbow + ConRadius(ND_PltWeir) + ShortTeeLength(ND_PltWeir)) - (Plant_Origin[0] - SocketDepth(ND_PltWeir) - 2*ElbowRadius(ND_PltWeir))) = 2.75655 m
seddrainslope_dim := [-sqrt(3)*H_SedSlope; D_SedDrainValve; -H_SedSlope]
# Sedtank Scripts
Sedtanktankscript :=
    viewtops ← viewtop1
    layer1 ← layer_new("tank", grey)
    tank1 ← Tank(Plant_Origin, [L_Sed; W_Sed; H_Sed], T_PlantWall)
    layerset ← layer_set("0")
    layerfreeze1 ← layer_freeze("tank")
    one ← stack(viewtops, layer1, tank1, layerset, layerfreeze1)
    return one
Sedtanksubtractchannelscript :=
    viewfront ← viewfront1
    box1 ← box([-L_Sed + T_ChannelWall; H_Sed - H_InletChannel; T_PlantWall + zc], [-L_Sed + T_ChannelWall + W_InletChannel; H_Sed; -L_Channel - zc])
    layerthaw ← layer_thaw("tank")
    subtract1 ← subtractD(Plant_Origin, [-L_Sed + T_ChannelWall + W_InletChannel; H_Sed; -L_Channel + T_PlantWall + zc])
    box2 ← box([-W_ExitChannel; H_Sed - H_ExitChannel; T_PlantWall + zc], [Plant_Origin[0]; H_Sed; -L_Channel - zc])
    subtract2 ← subtractD(Plant_Origin, [Plant_Origin[0]; H_Sed; -L_Channel - zc])
    viewtop ← viewtop1
    layerfreeze1 ← layer_freeze("tank")
    one ← stack(viewfront, box1, layerthaw, subtract1, box2, subtract2, viewtop, layerfreeze1)
    return one
Sedtankexitchannelscript :=
    layer2 ← layer_new("echannel", ltgrey)
    channel1 ← ChannelDrawing(echannel_origin, [W_Sed + 2*T_PlantWall; W_ExitChannel; H_ExitChannel], T_ChannelWall)
    rotate1 ← rotate(echannel_origin, 90)
    bigunion ← union_allA
    layerset ← layer_set("0")
    layerfreeze2 ← layer_freeze("echannel")
    one ← stack(layer2, channel1, rotate1, bigunion, layerset, layerfreeze2)
    return ← one
Sedtankexitweirscriptparallel :=
    viewright ← viewrightside1
    layerset ← layer_set("0")
    box1 ← box(Plant_Origin, sedweirexit_dim)
    move1 ← move_all(Plant_Origin, sedweirexit_origin)
    layernew1 ← layer_new("sedweirexit", ltgrey)
    layerfreeze ← layer_freeze("0")
    viewfront ← viewfront1
    box2 ← box(Plant_Origin, [W_ExitChannelMin + T_SedWeir; H_ExitChannel; sedweirexit_dim[2]])
    move2 ← move_all(Plant_Origin, [-W_ExitChannel; sedweirexit_origin[1]; T_PlantWall - T_SedWeir])
    layerthaw2 ← layer_thaw("0")
    union1 ← union_allA
    layerset ← layer_set("0")
    layerfreeze2 ← layer_freeze("sedweirexit")
    viewtop ← viewtop1
    one ← stack(viewright, layerset, box1, move1, layernew1, layerfreeze, viewfront, box2, move2, layerthaw2, union1, layerset, layerfreeze2, viewtop)
    return one
sedweirexit_origin = [-0.15; 1.39455; -0.213211] m
Sedtankexitweirscriptperpindicular :=
    layernew1 ← layer_new("sedweirexit", ltgrey)
    viewfront ← viewfront1
    box1 ← box(Plant_Origin, sedweirexit_dim)
    move1 ← move_all(Plant_Origin, sedweirexit_origin)
    layerset ← layer_set("0")
    layerfreeze2 ← layer_freeze("sedweirexit")
    viewtop ← viewtop1
    one ← stack(layernew1, viewfront, box1, move1, layerset, layerset, layerfreeze2, viewtop)
    return one
Sedtankexitweirscript :=
    Sedtankexitweirscriptperpindicular if Geom_ExitChannel == Perpindicular_Weir
    Sedtankexitweirscriptparallel otherwise
Sedtankinletweirscriptparallel :=
    viewright ← viewrightside1
    layerset ← layer_set("0")
    box1 ← box(Plant_Origin, sedweirinlet_dim)
    move1 ← move_all(Plant_Origin, sedweirinlet_origin)
    layernew1 ← layer_new("sedweirinlet", ltgrey)
    layerfreeze ← layer_freeze("0")
    viewfront ← viewfront1
    box2 ← box(Plant_Origin, [W_InletChannelEst + T_SedWeir; H_InletChannel; sedweirinlet_dim[2]])
    move2 ← move_all(Plant_Origin, [-L_Sed; sedweirinlet_origin[1]; T_PlantWall - T_SedWeir])
    viewtop ← viewtop1
    mirror1 ← mirror3d_all([-L_Sed + W_InletChannelEst; L_Channel/2 - T_ChannelWall; Plant_Origin[2]])
    layerthaw2 ← layer_thaw("0")
    union1 ← union_allA
    layerset ← layer_set("0")
    layerfreeze2 ← layer_freeze("sedweirinlet")
    viewtop ← viewtop1
    one ← stack(viewright, layerset, box1, move1, layernew1, layerfreeze, viewfront, box2, move2, viewtop, layerthaw2, union1, layerset, layerfreeze2, viewtop)
    return one
# pipe11_origin | pipe14_origin | pipe6_1ength | pipe7_length | pipe8_length | pipe13_length | pipe14_length
pipe5_1ength
Sedtankinletweirscriptperpindicular :=
    layernew1 ← layer_new("sedweirinlet", ltgrey)
    viewfront ← viewfront1
    box1 ← box(Plant_Origin, sedweirinlet_dim)
    move1 ← move_all(Plant_Origin, sedweirinlet_origin)
    layerset ← layer_set("0")
    layerfreeze2 ← layer_freeze("sedweirinlet")
    viewtop ← viewtop1
    one ← stack(layernew1, viewfront, box1, move1, layerset, layerset, layerfreeze2, viewtop)
    return one
Sedtankinletweirscript :=
    Sedtankinletweirscriptperpindicular if EN_InletChannelGeom == Perpindicular_Weir
    Sedtankinletweirscriptparallel otherwise
# pipe12_origin | pipe13_origin | pipe1_length
Sedtankinletchannelscript :=
    layer2 ← layer_new("channel", ltgrey)
    channel1 ← ChannelDrawing(channel_origin, [W_Sed + 2*T_PlantWall; W_InletChannel; H_InletChannel], T_ChannelWall)
    rotate1 ← rotate(channel_origin, 90)
    box1 ← box(channelinletwall_origin, channelinletwall_origin + channelinletwall_dim)
    bigunion ← union_allA
    box2 ← box(channelinletbox1_origin, channelinletbox1_origin + channelinletbox1_dim)
    subtract2 ← subtractD(Plant_Origin, channelinletbox1_origin)
    box3 ← box(channelinletbox2_origin, channelinletbox2_origin + channelinletbox2_dim)
    subtract3 ← subtractD(Plant_Origin, channelinletbox2_origin)
    a ← ConRadius(vlookup(OD_SedManifoldPipe, Pipesizescoupling, 1)[0])
    c ← vlookup(OD_SedManifoldPipe, Pipesizescoupling, 1)[0]
    viewtops ← viewtop1
    cylinder1 ← cylinderC(iccoupling_origin, a, -SocketDepth(c))
    cylinder2 ← cylinderC([iccoupling_origin[0]; iccoupling_origin[1]; iccoupling_origin[2] - SocketDepth(c)], outerradius(c), -T_ChannelWall + SocketDepth(c))
    union1 ← unionC([iccoupling_origin[0]; iccoupling_origin[1] + a; iccoupling_origin[2]], [iccoupling_origin[0]; iccoupling_origin[1] + outerradius(c); iccoupling_origin[2] - SocketDepth(c)])
    array1 ← arrayB([iccoupling_origin[0]; iccoupling_origin[1] + a; iccoupling_origin[2]], N_SedBays, 1, -W_SedBay)
    union2 ← unionC([
        Plant_Origin[0] - L_Sed + W_InletChannel - 3*zc;
        Plant_Origin[1] - T_PlantWall + 3*zc;
        Plant_Origin[2] + H_Sed - H_InletChannel
    ], [
        Plant_Origin[0] - L_Sed + 3*zc;
        Plant_Origin[1] - T_PlantWall + W_Sed + 3*zc;
        Plant_Origin[2] + H_Sed - H_InletChannel
    ])
    subtract4 ← subtractD(channel_origin, [iccoupling_origin[0]; iccoupling_origin[1] + a; iccoupling_origin[2]])
    layerset ← layer_set("0")
    layerfreeze2 ← layer_freeze("channel")
    one ← stack(layer2, channel1, rotate1, bigunion, viewtops, cylinder1, cylinder2, union1, array1, union2, subtract4, layerset, layerfreeze2)
    return ← one
Z_SedSlopes + H_SedBetween = 0.802822 m
Sedbottomslopeslope_origin = [0.431832; 0.0981679; 0] m
W_SedSlope*tan(AN_SedSlope) = 0.704654 m
Z_SedSlopes = 0.802822 m
H_SedSlopeTriangle = 0.704654 m
Seddrainadapterscript :=
    local ← layer_new("seddrainadapter", green)
    for i ∈ 0 .. N_SedBays - 1
        drawcoupling ← maleadapter([-(W_SedBay*(N_SedBays - i) - 0.5*W_SedBay); Plant_Origin[2]; Plant_Origin[0]], ND_SedDrainAdapter, T_PlantWall + 0.5*D_SedDrainValve, EN_PipeSpec, [Plant_Origin[1]; Plant_Origin[0]; Plant_Origin[2]], "tank", "seddrainadapter")
        local ← stack(local, viewleftside, drawcoupling)
    local ← stack(local, viewtop1, layer_set("0"), layer_freeze("seddraincoupling"))
    local
# Draws on the far side of the tank(left side from top view) viewing from the right side of the tank!
Seddrainslopescript :=
    local ← stack(layer_new("seddrainslopes", blue3))
    wedge1 ← wedge3d([Plant_Origin[0]; W_SedBay*N_SedBays - 0.5*W_SedBay - D_SedDrainValve/2; 0 m], seddrainslope_dim + [Plant_Origin[0]; W_SedBay*N_SedBays - 0.5*W_SedBay - D_SedDrainValve/2; 0 m])
    arraybay ← concat("-array", sp, "ALL", sp, sp, "r", sp, stringit_nounits(N_SedBays), sp, "1", sp, stringit(-W_SedBay))
    local ←
        stack(local, wedge1, union_allA, layer_thaw("tank"), viewtop1, subtractD(Plant_Origin, [Plant_Origin[0] + seddrainslope_dim[0]; W_SedBay*N_SedBays - 0.5*W_SedBay; Plant_Origin[2]])) if N_SedBays == 1
        stack(local, wedge1, arraybay, union_allA, layer_thaw("tank"), viewtop1, subtractD(Plant_Origin, [Plant_Origin[0] + seddrainslope_dim[0]; W_SedBay*N_SedBays - 0.5*W_SedBay; Plant_Origin[2]])) otherwise
    local ← stack(local, layer_set("0"), layer_freeze("seddrainslopes"), layer_freeze("tank"))
    local
# Creates a wedge starting at grade and going into the floor of the sed tank aligned with the drainage channel
# Arrays the wedge throughout all bays if needed, the subtracts them
Pi_LDFlocValve := 1.4143/1.16
Seddrainvalvescript :=
    local ← stack(layer_new("seddrainvalves", blue3), viewtop1)
    insert1 ← insertdwg("VAL-Scaled-Gate-Valve-Threaded", [
        Plant_Origin[0] + T_PlantWall + Pi_LDFlocValve*D_SedDrainValve;
        W_SedBay*N_SedBays - 0.5*W_SedBay;
        0 m
    ], D_SedScale, 0)
    arraybay ← concat("-array", sp, "ALL", sp, sp, "r", sp, stringit_nounits(N_SedBays), sp, "1", sp, stringit(-W_SedBay))
    local ←
        stack(local, insert1, layer_set("0"), layer_freeze("seddrainvalves")) if N_SedBays == 1
        stack(local, insert1, arraybay, layer_set("0"), layer_freeze("seddrainvalves")) otherwise
    return local
# Inserts the valve as a block and scales it according to calculations
Sedbottomslopescript :=
    layer3 ← layer_new("bottomslopes", ltgrey)
    view ← viewrightside1
    pline10 ← pline10([Sedbottomslopeslope_origin[0]; Sedbottomslopeslope_origin[1]], [Sedbottomslopeslope_origin[0]; Sedbottomslopeslope_origin[1] - T_SedSludge], [Sedbottomslopeslope_origin[0] + T_ConcreteMin; Sedbottomslopeslope_origin[1] - T_SedSludge], [
        Sedbottomslopeslope_origin[0] + T_ConcreteMin;
        Sedbottomslopeslope_origin[1] - T_SedSludge - H_SedSludge
    ], [
        Sedbottomslopeslope_origin[0] - W_SedInletBottom;
        Sedbottomslopeslope_origin[1] - T_SedSludge - H_SedSludge
    ], [Sedbottomslopeslope_origin[0] - W_SedInletBottom; Z_SedSlopes], [Sedbottomslopeslope_origin[0] - W_SedInletBottom; Z_SedSlopes + H_SedBetween], [Sedbottomslopeslope_origin[0] - W_SedInletBottom + T_ConcreteMin/2; Z_SedSlopes + H_SedBetween], [Sedbottomslopeslope_origin[0] - W_SedInletBottom + T_ConcreteMin/2; Z_SedSlopes])
    extrude1 ← extrude(Sedbottomslopeslope_origin, -L_Sed)
    mirror3d1 ← mirror3dyz(Sedbottomslopeslope_origin, [
        Sedbottomslopeslope_origin[0] + W_SedDrainCover/2;
        Sedbottomslopeslope_origin[1];
        Sedbottomslopeslope_origin[2]
    ])
    unionall ← union_allA
    viewtop ← viewtop1
    arraybay1 ← concat("-array", sp, "ALL", sp, sp, "r", sp, stringit_nounits(N_SedBays), sp, "1", sp, stringit(W_SedBay))
    arraybay2 ← concat("-array", sp, "ALL", sp, sp, "r", sp, stringit_nounits(N_SedBays), sp, "1", sp, stringit(W_SedBay))
    bigunion ← union_allA
    layerfreeze3 ← layer_freeze("bottomslopes")
    layerset ← layer_set("0")
    one ← stack(layer3, view, pline10, view, extrude1, mirror3d1, unionall, viewtop, bigunion, layerset, layerfreeze3) if N_SedBays == 1
    one ← stack(layer3, view, pline10, view, extrude1, mirror3d1, unionall, viewtop, arraybay2, bigunion, layerset, layerfreeze3) if (N_SedBays > 1 and N_SedTanks ≥ 1)
    one ← stack(layer3, view, pline10, view, extrude1, mirror3d1, unionall, viewtop, arraybay1, bigunion, layerset, layerfreeze3) otherwise
    return one
Z_SedSlopes + H_SedBetween = 0.802822 m
# pipe2_origin | pipe3_origin | pipe11_origin | pipe14_origin | pipe6_1ength | pipe7_length | pipe8_length | pipe13_length | pipe14_length
# pipe4_origin | pipe5_origin | pipe8_origin | pipe5_1ength
# pipe6_origin | pipe7_origin | pipe9_origin | pipe10_origin | pipe12_origin | pipe13_origin | pipe1_length
influentmanifoldscript :=
    viewtop ← viewtop1
    inletholeslayer ← layer_new("iccoupling", green)
    iccoupling ← couplingIDsocket(iccoupling_origin, OD_SedManifoldPipe, T_ChannelWall, EN_PipeSpec)
    layerset ← layer_set("0")
    layerfreezechimneycoupling ← layer_freeze("iccoupling")
    viewright ← viewrightside1
    manpipelayer ← layer_new("manifoldpipe", blue)
    manpipe ← Pipe(manifoldpipe_origin, ND_SedManifold, L_SedManifoldPipe - ElbowRadius(ND_SedManifold), EN_PipeSpec)
    cap ← cap([
        manifoldpipe_origin[0];
        manifoldpipe_origin[1];
        manifoldpipe_origin[2] + L_SedManifoldPipe - ElbowRadius(ND_SedManifold) - (CapHeight(NominalPipeSize(ND_SedManifold)) - (CapDiameter(NominalPipeSize(ND_SedManifold))/2 - outerradius(NominalPipeSize(ND_SedManifold))))
    ], ND_SedManifold, EN_PipeSpec)
    cylinder3 ← cylinderC([
        manifoldpipe_origin[2] + SocketDepth(ND_SedManifold) + B_SedManifoldPort/2;
        manifoldpipe_origin[0];
        manifoldpipe_origin[1]
    ], D_SedManifoldPort/2, -OD_SedManifoldPipe/2 - zc)
    array1 ← arrayB([
        manifoldpipe_origin[2] + SocketDepth(ND_SedManifold) + B_SedManifoldPort/2 + D_SedManifoldPort/2;
        manifoldpipe_origin[0];
        manifoldpipe_origin[1]
    ], 1, N_SedManifoldPorts, B_SedManifoldPort)
    subtract2 ← subtractH([manifoldpipe_origin[2]; manifoldpipe_origin[0] - outerradius(ND_SedManifold)], [manifoldpipe_origin[2] - 3*zc; manifoldpipe_origin[0] - outerradius(ND_SedManifold) + zc], [
        manifoldpipe_origin[2] + L_SedManifoldPipe;
        manifoldpipe_origin[0] + outerradius(ND_SedManifold) + zc
    ])
    freezemanpipe ← layer_freeze("manifoldpipe")
    layermanifoldelbow ← layer_new("manifoldelbow", green)
    elbow ← elbow(manifoldelbow_origin, ND_SedManifold, EN_PipeSpec)
    viewright ← viewrightside1
    rotateelbow ← rotate_All(manifoldpipe_origin, -90)
    mirrorelbow ← mirror_allyes([manifoldelbow_origin[0] + ElbowRadius(ND_SedManifold); manifoldelbow_origin[1]], [manifoldelbow_origin[0] + ElbowRadius(ND_SedManifold); (2*manifoldelbow_origin)[1]])
    moveelbow ← move_all([
        -L_Sed + W_InletChannelEst/2 + ElbowRadius(ND_SedManifold);
        manifoldelbow_origin[1];
        manifoldelbow_origin[2]
    ], [-L_Sed + W_InletChannelEst/2; manifoldelbow_origin[1]; manifoldelbow_origin[2]])
    layerfreezeelbow ← layer_freeze("manifoldelbow")
    layerchimneystops ← layer_new("chimney stops", grey)
    chimneystop ← chimneystop([iccoupling_origin[0]; iccoupling_origin[1]; H_Sed - H_InletChannel - H_SedSludge], ND_SedManifold, HW_InletChannel, 1 in, EN_PipeSpec)
    layerthawcoupling ← layer_thaw("iccoupling")
    layerthawmanifold ← layer_thaw("manifoldpipe")
    layerthawmanifoldelbow ← layer_thaw("manifoldelbow")
    arraybay3 ← concat("-array", sp, "ALL", sp, sp, "r", sp, stringit_nounits(N_SedBays), sp, "1", sp, stringit(-W_SedBay))
    arraybay4 ← concat("-array", sp, "ALL", sp, sp, "r", sp, stringit_nounits(N_SedBays), sp, "1", sp, stringit(-W_SedBay))
    layerset ← layer_set("0")
    layerfreezechimneystops ← layer_freeze("chimney stops")
    one ← stack(viewtop, inletholeslayer, iccoupling, layerset, layerfreezechimneycoupling, viewright, manpipelayer, manpipe, cap, viewtop, cylinder3, array1, subtract2, layerset, freezemanpipe, viewtop, layermanifoldelbow, elbow, viewright, rotateelbow, viewtop, mirrorelbow, moveelbow, layerset, layerfreezeelbow, layerchimneystops, chimneystop, layerthawcoupling, layerthawmanifold, layerthawmanifoldelbow, layerset, layerfreezechimneycoupling, freezemanpipe, layerfreezeelbow, layerfreezechimneystops) if N_SedBays == 1
    one ← stack(viewtop, inletholeslayer, iccoupling, layerset, viewright, manpipelayer, layerfreezechimneycoupling, manpipe, cap, viewtop, cylinder3, array1, subtract2, layerset, freezemanpipe, viewtop, layermanifoldelbow, elbow, viewright, rotateelbow, viewtop, mirrorelbow, moveelbow, layerset, layerfreezeelbow, layerchimneystops, chimneystop, layerthawcoupling, layerthawmanifold, layerthawmanifoldelbow, arraybay4, layerset, layerfreezechimneycoupling, freezemanpipe, layerfreezeelbow, layerfreezechimneystops) if (N_SedBays > 1 and N_SedTanks ≥ 1)
    one ← stack(viewtop, inletholeslayer, iccoupling, layerset, viewright, manpipelayer, layerfreezechimneycoupling, manpipe, cap, viewtop, cylinder3, array1, subtract2, layerset, freezemanpipe, viewtop, layermanifoldelbow, elbow, viewright, rotateelbow, viewtop, mirrorelbow, moveelbow, layerset, layerfreezeelbow, layerchimneystops, chimneystop, layerthawcoupling, layerthawmanifold, layerthawmanifoldelbow, arraybay3, layerset, layerfreezechimneycoupling, freezemanpipe, layerfreezeelbow, layerfreezechimneystops) otherwise
    return one
    = [
        "_-view o t"; "-layer m iccoupling"; "c t 0,255,0"; "iccoupling"; "  "; "_zoom w -3.49965,1.69097,1.39455 -3.29772,1.48904,1.39455"; "_cylinder -3.39869,1.59,1.39455 0.10096 -0.057"; "_cylinder -3.39869,1.59,1.40455 0.08414 -0.077"; "_subtract -3.49965,1.59,1.39455  -3.48282,1.59,1.40455 "; "_cylinder -3.39869,1.59,1.30155 0.10096 -0.057"
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    ]
inletpipescript :=
    layernew ← layer_new("inletpipe", blue)
    viewtop ← viewtop1
    pipe ← Pipe([iccoupling_origin[0]; iccoupling_origin[1]; manifoldelbow_origin[2] + ElbowRadius(ND_SedManifold)], ND_SedManifold, H_Sed - H_InletChannel - T_ChannelWall + SocketDepth(ND_SedManifold) - (manifoldelbow_origin[2] + ElbowRadius(ND_SedManifold)), EN_PipeSpec)
    arraybay3 ← concat("-array", sp, "ALL", sp, sp, "r", sp, stringit_nounits(N_SedBays), sp, "1", sp, stringit(-W_SedBay))
    arraybay4 ← concat("-array", sp, "ALL", sp, sp, "r", sp, stringit_nounits(N_SedBays), sp, "1", sp, stringit(-W_SedBay))
    layerset ← layer_set("0")
    layerfreeze ← layer_freeze("inletpipe")
    one ← stack(layernew, viewtop, pipe, layerset, layerfreeze) if N_SedBays == 1
    one ← stack(layernew, viewtop, pipe, arraybay4, layerset, layerfreeze) if (N_SedBays > 1 and N_SedTanks ≥ 1)
    one ← stack(layernew, viewtop, pipe, arraybay3, layerset, layerfreeze) otherwise
    = ["-layer m inletpipe"; "c t 0,255,255"; "inletpipe"; "  "; "_-view o t"; "_zoom w -3.49282,1.49586,0.42773 -3.30455,1.68414,0.42773 _cylinder -3.39869,1.59,0.42773 0.08414 0.87382 _cylinder -3.39869,1.59,0.42773 0.07725 0.87382 _subtract -3.31455,1.59,0.42773  -3.32143,1.59,0.42773 "; "-array ALL  r 2 1 -1.06"; "-layer s 0"; "  "; "-layer f inletpipe"; "  "]
SedDrainCover_origin = [0.431832; 0.0481679; 0] m
Orificescript :=
    viewtops ← viewtop1
    layer1 ← layer_new("draincover", red)
    cylinder1 ← cylinderC([
        DrainCover_origin[0] + (-L_Sed) + B_SedSludgeOrifices;
        DrainCover_origin[1] + W_SedDrainCover/2;
        DrainCover_origin[2]
    ], D_SedSludgeOrifice/2, T_SedSludge)
    viewtops2 ← viewtop1
    cylinders ← array_all(1, N_SedSludgeOrifices, B_SedSludgeOrifices)
    union1 ← union_allA
    one ← stack(viewtops, layer1, cylinder1, cylinders, union1)
    return one
Draincoverscript :=
    viewtops ← viewtop1
    layerset2 ← layer_set("draincover")
    box1 ← box(DrainCover_origin, [
        DrainCover_origin[0] - L_Sed;
        DrainCover_origin[1] + W_SedDrainCover;
        DrainCover_origin[2] + T_SedSludge
    ])
    holes ← subtractD(DrainCover_origin, [
        DrainCover_origin[0] + (-L_Sed) + B_SedSludgeOrifices - D_SedSludgeOrifice/2;
        DrainCover_origin[1] + W_SedDrainCover/2;
        DrainCover_origin[2]
    ])
    arraybay1 ← concat("-array", sp, "ALL", sp, sp, "r", sp, stringit_nounits(N_SedBays), sp, "1", sp, stringit(W_SedBay))
    arraybay2 ← concat("-array", sp, "ALL", sp, sp, "r", sp, stringit_nounits(N_SedBays), sp, "1", sp, stringit(W_SedBay))
    layerset ← layer_set("0")
    layerfreeze ← layer_freeze("draincover")
    one ← stack(viewtops, layerset2, box1, viewtops, holes, layerset, layerfreeze) if N_SedBays == 1
    one ← stack(viewtops, layerset2, box1, viewtops, holes, arraybay2, layerset, layerfreeze) if N_SedBays > 1 and N_SedTanks ≥ 1
    one ← stack(viewtops, layerset2, box1, viewtops, holes, arraybay1, layerset, layerfreeze) otherwise
    return one
Sedtanklaminascript :=
    layer7 ← layer_new("lamina", purple)
    lamina1 ← laminascript2(lamina_origin, W_SedBay, L_SedPlate, T_SedPlate, AN_SedPlate, N_SedModulePlates, N_SedModules, ND_SedModulePipe, ND_SedModulePipeSpace, S_SedPlateModule, S_SedModulePipes, L_SedModulePipe, N_SedPlateCol, B_SedPlateHorizontal)
    viewright ← viewrightside1
    array2 ← array_all(1, N_SedBays, W_SedBay)
    block1 ← block("laminablock", lamina_origin, lamina_origin)
    layerset1 ← layer_set("0")
    layerfreeze7 ← layer_freeze("lamina")
    one ← stack(layer7, lamina1, viewright, array2, block1, layerset1, layerfreeze7)
    return one
FlocHopperScript :=
    layer1 ← layer_new("flochopper", green)
    viewtop ← viewtop1
    zoomin1 ← zoom_win([FlocHopper_origin[0]; FlocHopper_origin[1]], [50 m; 100 m])
    flochopper_box ← box(FlocHopper_origin, FlocHopperBox_dim)
    flochopper_wedge1 ← wedge(FlocHopper_origin, FlocHopperWedge_dim, H_FlocHopper)
    mirror_wedge ← mirrorD(FlocHopperWedge_dim, [FlocHopper_origin[0] + L_FlocHopper/2; FlocHopper_origin[1]], [FlocHopper_origin[0] + L_FlocHopper/2; T_FlocHopper])
    zoomin2 ← zoom_win([FlocHopper_origin[0]; FlocHopper_origin[1]], [2*FlocHopperBox_dim[0]; 2*FlocHopperBox_dim[1]])
    subtract_wedge1 ← subtractD([FlocHopperBox_dim[0]/2; FlocHopperBox_dim[1]; FlocHopperBox_dim[2]], [FlocHopperWedge_dim[0]; FlocHopperWedge_dim[1]/2; FlocHopper_origin[2]])
    subtract_wedge2 ← subtractD([FlocHopperBox_dim[0]/2; FlocHopperBox_dim[1]], [FlocHopperWedge_dim[0] + W_FlocHopper; FlocHopperWedge_dim[1]/2])
    rotate_flochopper1 ← rotate_3d(FlocHopperBox_dim, FlocHopper_origin, "z", 90)
    rotate_flochopper ← rotate_3d([FlocHopper_origin[0]; FlocHopper_origin[1]; H_FlocHopper], [FlocHopper_origin[0] + T_FlocHopper; FlocHopper_origin[1]; FlocHopper_origin[2]], "y", 90 - AN_FlocHopper)
    move_flochopper ← move_allD([
        -L_Sed + SedInletChimneyOuter_dim[0] + T_FlocHopper;
        W_SedBay*(N_SedBays - 1) + W_SedBayDivider*(N_SedBays - 1);
        SedDrainCover_dim[1]
    ])
    arraybay3 ← concat("-array", sp, "ALL", sp, sp, "r", sp, stringit_nounits(N_SedBays), sp, "1", sp, stringit(-W_SedBay - W_SedBayDivider/2))
    arraybay4 ← concat("-array", sp, "ALL", sp, sp, "r", sp, stringit_nounits(N_SedBays), sp, "1", sp, stringit(-((W_Sed - (N_SedBays - 1)*W_SedBayDivider)/N_SedBays + W_SedBayDivider)))
    layerset ← layer_set("0")
    layerfreeze ← layer_freeze("flochopper")
    one ← stack(layer1, viewtop, zoomin1, flochopper_box, flochopper_wedge1, mirror_wedge, zoomin2, subtract_wedge1, subtract_wedge2, rotate_flochopper1, rotate_flochopper, move_flochopper, layerset, layerfreeze) if N_SedBays == 1
    one ← stack(layer1, viewtop, zoomin1, flochopper_box, flochopper_wedge1, mirror_wedge, zoomin2, subtract_wedge1, subtract_wedge2, rotate_flochopper1, rotate_flochopper, move_flochopper, arraybay4, layerset, layerfreeze) if N_SedBays > 1 and N_SedTanks ≥ 1
    one ← stack(layer1, viewtop, zoomin1, flochopper_box, flochopper_wedge1, mirror_wedge, zoomin2, subtract_wedge1, subtract_wedge2, rotate_flochopper1, rotate_flochopper, move_flochopper, arraybay3, layerset, layerfreeze) otherwise
    return one  # error: This variable is undefined.
Pipeframescript :=
    layer1 ← layer_new("pipeframe", yellow)
    view1 ← viewfront1
    horizontalCylinder ← cylinderC(pipeframe_origin, outerradius(ND_SedPlateFrame), -W_SedBay)
    view2 ← viewtop1
    stub ← cylinderC([pipeframe_origin[0]; B_SedPlateFrameVertical; pipeframe_origin[1] + outerradius(ND_SedPlateFrame)], outerradius(ND_SedFrameStub), H_SedFrameStub)
    arraystub ← array2D([
        pipeframe_origin[0] - outerradius(ND_SedFrameStub)/2;
        B_SedPlateFrameVertical + outerradius(ND_SedFrameStub);
        pipeframe_origin[1]
    ], [
        pipeframe_origin[0] + outerradius(ND_SedFrameStub)/2;
        B_SedPlateFrameVertical - outerradius(ND_SedFrameStub);
        pipeframe_origin[1]
    ], 2, N_SedModules + 1, W_SedBay - 2*B_SedPlateFrameVertical, B_SedFrameStub)
    array1 ← array_all(1, 3, L_SedActive/2)
    view3 ← viewrightside1
    verticalCylinder ← cylinderC([B_SedPlateFrameVertical; pipeframe_origin[1]; pipeframe_origin[0]], outerradius(ND_SedPlateFrame), L_Sed - W_InletChannel - L_SedPlate*cos(AN_SedPlate) - T_ChannelWall + 2*zc)
    supportPipe ← cylinderC([pipeframe_origin[0]; pipeframe_origin[2] + W_SedBay; pipeframe_origin[1]], outerradius(ND_SedPlateFrame), H_SedBetween)
    flange ← cylinderC([
        pipeframe_origin[0];
        pipeframe_origin[2] + W_SedBay;
        pipeframe_origin[1] - outerdiameter(ND_SedPlateFrame)/2
    ], D_Flange/2, T_Flange)
    arrayholder ← array2D([pipeframe_origin[0] - D_Flange; pipeframe_origin[2] + W_SedBay + D_Flange; pipeframe_origin[1]], [pipeframe_origin[0] + D_Flange; pipeframe_origin[2] + W_SedBay - D_Flange; pipeframe_origin[1]], N_SedBays - 1, 3, L_SedActive/2, W_SedBay)
    mirrorcylinder ← mirror_all([0; W_SedBay/2], [L_Sed - W_InletChannel - W_ExitChannel - 2*T_ChannelWall; W_SedBay/2])
    union1 ← union_allA
    arraybay ← array_all(N_SedBays, 1, W_SedBay)
    layerset1 ← layer_set("0")
    layerfreeze1 ← layer_freeze("pipeframe")
    one ←
        stack(layer1, view1, horizontalCylinder, view2, array1, view3, verticalCylinder, view2, mirrorcylinder, stub, arraystub, union1, arraybay, arrayholder, layerset1, layerfreeze1) if (H_SedBetween == 0 and N_SedBays > 1)
        stack(layer1, view1, horizontalCylinder, view2, array1, view3, verticalCylinder, view2, mirrorcylinder, stub, arraystub, union1, layerset1, layerfreeze1) if (N_SedBays == 1)
        stack(layer1, view1, horizontalCylinder, view2, array1, view3, verticalCylinder, view2, mirrorcylinder, stub, arraystub, union1, arraybay, arrayholder, layerset1, layerfreeze1) otherwise
SedLaunderscript :=
    layernew1 ← layer_new("launder", blue)
    viewtop1 ← viewtop1
    win1 ← [
        SedLaunder_origin[0] - outerradius(ND_SedLaunder) - zc;
        SedLaunder_origin[1] - outerradius(ND_SedLaunder) - zc;
        SedLaunder_origin[2]
    ]
    win2 ← [
        (SedLaunder_origin[0] + outerradius(ND_SedLaunder)) + zc;
        SedLaunder_origin[1] + outerradius(ND_SedLaunder) + zc;
        SedLaunder_origin[2]
    ]
    zoom_win ← zoom_win(win1, win2)
    pipe1 ← Pipe(SedLaunder_origin, ND_SedLaunder, L_SedLaunder, EN_PipeSpec)
    cylinder3 ← cylinderD([
        SedLaunder_origin[0];
        SedLaunder_origin[1];
        SedLaunder_origin[2] + L_SedActive - B_SedLaunderOrifices/2
    ], D_SedLaunderOrifice/2, [
        SedLaunder_origin[0];
        SedLaunder_origin[1] + outerradius(ND_SedLaunder) + zc;
        SedLaunder_origin[2] + L_SedActive - B_SedLaunderOrifices/2
    ])
    viewrightside1 ← viewrightside1
    array1 ← arrayB([
        SedLaunder_origin[1] + outerradius(ND_SedLaunder) + zc;
        SedLaunder_origin[2] + L_SedActive - B_SedLaunderOrifices/2;
        SedLaunder_origin[0]
    ], N_SedLaunderOrificesRow, 1, -B_SedLaunderOrifices)
    subtract2 ← subtractH([SedLaunder_origin[0]; SedLaunder_origin[1] - outerradius(ND_SedLaunder)], [
        SedLaunder_origin[0] + D_SedLaunderOrifice + zc;
        SedLaunder_origin[1] + outerradius(ND_SedLaunder) + 2*zc
    ], [SedLaunder_origin[0] - D_SedLaunderOrifice - zc; SedLaunder_origin[1] - zc])
    cylinder4 ← cylinderD([
        SedLaunder_origin[0];
        SedLaunder_origin[1];
        SedLaunder_origin[2] + L_SedActive - B_SedLaunderOrifices/2
    ], D_SedLaunderOrifice/2, [
        SedLaunder_origin[0] + (outerradius(ND_SedLaunder)*cos(π/6)) + outerradius(ND_SedLaunder);
        SedLaunder_origin[1] + (outerradius(ND_SedLaunder)*sin(π/6)) + outerradius(ND_SedLaunder);
        SedLaunder_origin[2] + L_SedActive - B_SedLaunderOrifices/2
    ])
    array2 ← arrayB([
        SedLaunder_origin[1] + (outerradius(ND_SedLaunder)*sin(π/6)) + outerradius(ND_SedLaunder);
        SedLaunder_origin[2] + L_SedActive - B_SedLaunderOrifices/2
    ], N_SedLaunderOrificesRow, 1, -B_SedLaunderOrifices)
    holecylinder ← cylinderD(SedLaunder_origin, ND_SedLaunder, [SedLaunder_origin[0]; SedLaunder_origin[1]; SedLaunder_origin[2] + L_SedLaunder])
    subtract3 ← subtractH([SedLaunder_origin[0]; SedLaunder_origin[1] - outerradius(ND_SedLaunder)], [
        SedLaunder_origin[0] + (outerradius(ND_SedLaunder)*cos(π/3)) + 2*zc;
        SedLaunder_origin[0] + (outerradius(ND_SedLaunder)*sin(π/3)) + 2*zc
    ], [SedLaunder_origin[0]; SedLaunder_origin[1]])
    rotate1 ← rotate18 ← rotate_3d([
        SedLaunder_origin[0] + innerD(ND_SedLaunder, EN_PipeSpec)/2;
        SedLaunder_origin[1];
        SedLaunder_origin[2]
    ], SedLaunder_origin, "y", 90)
    rotate2 ← rotate_3d([
        SedLaunder_origin[0];
        SedLaunder_origin[1] + innerD(ND_SedLaunder, EN_PipeSpec)/2;
        SedLaunder_origin[2]
    ], SedLaunder_origin, "x", 120)
    layerset1 ← layer_set("0")
    view2 ← viewrightside1
    layerfreeze1 ← layer_freeze("launder")
    layercoupling ← layer_new("launder coupling", grey)
    coupling ← couplingIDsocket([SedLaunder_origin[1]; Plant_Origin[1] + Z_SedLaunder; Plant_Origin[2] - W_ExitChannel], outerdiameter(ND_SedLaunder), T_ChannelWall, EN_PipeSpec)
    view2 ← viewrightside1
    layerset1 ← layer_set("0")
    layerfreezecoupl ← layer_freeze("launder coupling")
    layernewcouplcap ← layer_new("laundercouplingcap", red)
    solidcap ← laundercouplingcap([
        SedLaunder_origin[1];
        Plant_Origin[1] + Z_SedLaunder;
        Plant_Origin[2] - W_ExitChannel - SocketDepth(ND_SedLaunder)
    ], ND_SedLaunder, EN_PipeSpec)
    layerset1 ← layer_set("0")
    layerfcouplcap ← layer_freeze("laundercouplingcap")
    layernewocap ← layer_new("launderorificecap", green)
    view3 ← viewleftside
    orificecap ← launderorificecap([
        (Plant_Origin[1] - W_Sed/(N_SedLaunders*N_SedBays*2));
        Plant_Origin[1] + Z_SedLaunder;
        Plant_Origin[2] + W_ExitChannel + T_PlantWall - SocketDepth(ND_SedLaunder)
    ], ND_SedLaunder, D_CapOrifice, EN_PipeSpec)
    layerset1 ← layer_set("0")
    layerfocap ← layer_freeze("launderorificecap")
    layerlaundercap ← layer_new("launder cap", yellow)
    laundercap ← cap([
        Plant_Origin[1] - W_Sed/(N_SedLaunders*N_SedBays*2);
        Plant_Origin[1] + Z_SedLaunder;
        ((Plant_Origin[2] + W_ExitChannel) + T_ChannelWall) + (L_SedLaunder - CapHeight(ND_SedLaunder)) - SocketDepth(ND_SedLaunder) + CapDiameter(NominalPipeSize(ND_SedLaunder))/2 - outerradius(NominalPipeSize(ND_SedLaunder))
    ], ND_SedLaunder, EN_PipeSpec)
    layerthawcoupling ← layer_thaw("launder coupling")
    layerthawlaunder ← layer_thaw("launder")
    layertocap ← layer_thaw("launderorificecap")
    layertcouplcap ← layer_thaw("laundercouplingcap")
    view2 ← viewrightside1
    arraywithinbay ← array_all(1, N_SedLaunders*N_SedBays, (2*SedLaunder_origin)[1])
    arraybay4 ← concat("-array", sp, "ALL", sp, sp, "r", sp, stringit_nounits(N_SedBays), sp, "1", sp, stringit(W_SedBay))
    arraybay2 ← concat("-array", sp, "ALL", sp, sp, "r", sp, stringit_nounits(N_SedBays), sp, "1", sp, stringit(W_SedBay))
    layerset1 ← layer_set("0")
    layerfreeze1 ← layer_freeze("launder")
    layerfreezecoupl ← layer_freeze("launder coupling")
    layerfreezecap ← layer_freeze("launder cap")
    layerfocap ← layer_freeze("launderorificecap")
    layerfcouplecap ← layer_freeze("laundercouplingcap")
    one ← stack(layernew1, viewtop1, zoom_win, pipe1, cylinder3, viewrightside1, array1, viewtop1, subtract2, viewtop1, zoom_win, cylinder4, viewrightside1, array2, viewtop1, subtract3, rotate1, rotate2, layerset1, view2, layerfreeze1, layercoupling, coupling, view2, layerset1, layerfreezecoupl, layernewcouplcap, solidcap, layerset1, layerfcouplcap, layernewocap, view3, orificecap, layerset1, layerfocap, layerlaundercap, view3, laundercap, layerthawcoupling, layerthawlaunder, layertocap, layertcouplcap, view2, arraywithinbay, layerset1, layerfreeze1, layerfreezecoupl, layerfreezecap, layerfocap, layerfcouplcap) if (N_SedTanks > 1 and N_SedBays > 1)
    one ← stack(layernew1, viewtop1, zoom_win, pipe1, cylinder3, viewrightside1, array1, viewtop1, subtract2, viewtop1, zoom_win, cylinder4, viewrightside1, array2, viewtop1, subtract3, rotate1, rotate2, layerset1, view2, layerfreeze1, layercoupling, coupling, view2, layerset1, layerfreezecoupl, layernewcouplcap, solidcap, layerset1, layerfcouplcap, layernewocap, view3, orificecap, layerset1, layerfocap, layerlaundercap, view3, laundercap, layerthawcoupling, layerthawlaunder, layertocap, layertcouplcap, view2, arraywithinbay, layerset1, layerfreeze1, layerfreezecoupl, layerfreezecap, layerfocap, layerfcouplcap) if N_SedBays == 1
    one ← stack(layernew1, viewtop1, zoom_win, pipe1, cylinder3, viewrightside1, array1, viewtop1, subtract2, viewtop1, zoom_win, cylinder4, viewrightside1, array2, viewtop1, subtract3, rotate1, rotate2, layerset1, layerfreeze1, view2, layerfreeze1, layercoupling, coupling, view2, layerset1, layerfreezecoupl, layernewcouplcap, solidcap, layerset1, layerfcouplcap, layernewocap, view3, orificecap, layerset1, layerfocap, layerlaundercap, view3, laundercap, layerthawcoupling, layerthawlaunder, layertocap, layertcouplcap, layerset1, layerfreeze1, layerfreezecoupl, layerfreezecap, layerfocap, layerfcouplcap) otherwise
    return one
    = [
        "-layer m launder";
        "c t 0,255,255";
        "launder";
        "  ";
        "_-view o t";
        "_zoom w -2.8957,0.46285,1.63182 -2.7614,0.59715,1.63182";
        "_zoom w -2.8957,0.46285,1.63182 -2.7614,0.59715,1.63182 _cylinder -2.82855,0.53,1.63182 0.05715 2.31914 _cylinder -2.82855,0.53,1.63182 0.0525 2.31914 _subtract -2.7714,0.53,1.63182  -2.77605,0.53,1.63182 ";
        "_cylinder -2.82855,0.53,3.73114 0.0065 c -2.82855,0.59715,3.73114";
        "_-view o r";
        "-array 0.59715,3.73114,-2.82855  R 20 1 -0.10766"
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    ]
launderholes :=
    layernew1 ← layer_new("launderholes", blue)
    viewright ← viewrightside1
    cylinder1 ← cylinderD([SedLaunder_origin[1]; SedLaunder_origin[2]; -W_ExitChannel + zc], ND_SedLaunder/2, [SedLaunder_origin[1]; SedLaunder_origin[2]; -W_ExitChannel - T_ChannelWall - zc])
    arraywithinbay ← array_all(N_SedLaunders*N_SedBays, 1, (2*SedLaunder_origin)[1])
    arraybay2 ← concat("-array", sp, "ALL", sp, sp, "r", sp, stringit_nounits(N_SedBays), sp, "1", sp, stringit(W_SedBay))
    arraybay4 ← concat("-array", sp, "ALL", sp, sp, "r", sp, stringit_nounits(N_SedBays), sp, "1", sp, stringit(W_SedBay + T_PlantWall))
    layerthaw1 ← layer_thaw("echannel")
    subtract1 ← subtractDall(echannel_origin)
    viewtop ← viewtop1
    layerset1 ← layer_set("0")
    layerfreezelaunderholes ← layer_freeze("launderholes")
    one ← stack(layernew1, viewright, cylinder1, viewtop, arraywithinbay, layerthaw1, viewtop1, subtract1, layerset1, layerfreezelaunderholes)
Sedtankarrayscript :=
    layerthaw1 ← layer_thaw("tank")
    layerthaw2 ← layer_thaw("channel")
    layerthaw2e ← layer_thaw("echannel")
    layerthaw3 ← layer_thaw("bottomslopes")
    layerthaw4 ← layer_thaw("iccoupling")
    layerthaw5 ← layer_thaw("draincover")
    layerthaw6 ← layer_thaw("slopes")
    layerthaw8 ← layer_thaw("lamina")
    layerthaw9 ← layer_thaw("flochopper")
    layerthaw10 ← layer_thaw("pipeframe")
    layerthaw11 ← layer_thaw("launder")
    layerthaw12 ← layer_thaw("chimneycoupling")
    layerthaw13 ← layer_thaw("chimney stops")
    layerthaw14 ← layer_thaw("manifoldpipe")
    layerthaw15 ← layer_thaw("manifoldelbow")
    layerthaw16 ← layer_thaw("inletpipe")
    layerthaw17 ← layer_thaw("launder coupling")
    layerthaw18 ← layer_thaw("launder cap")
    layerthaw19 ← layer_thaw("seddrainadapter")
    layerthaw20 ← layer_thaw("seddrainvalves")
    layerthaw21 ← layer_thaw("launderorificecap")
    layerthaw22 ← layer_thaw("laundercouplingcap")
    viewtop ← viewtop1
    arraytank1 ← concat("-array", sp, "ALL", sp, sp, "r", sp, stringit_nounits(N_SedTanks), sp, "1", sp, stringit(W_Sed + T_PlantWall))
    layerfreeze13 ← layer_freeze("tank")
    layerfreeze14 ← layer_freeze("channel")
    layerfreeze15 ← layer_freeze("echannel")
    layerfreeze16 ← layer_freeze("bottomslopes")
    layerfreeze17 ← layer_freeze("iccoupling")
    layerfreeze18 ← layer_freeze("draincover")
    layerfreeze19 ← layer_freeze("slopes")
    layerfreeze21 ← layer_freeze("lamina")
    layerfreeze22 ← layer_freeze("flochopper")
    layerfreeze23 ← layer_freeze("pipeframe")
    layerfreeze24 ← layer_freeze("launder")
    layerfreeze25 ← layer_freeze("chimneycoupling")
    layerfreeze26 ← layer_freeze("chimney stops")
    layerfreeze27 ← layer_freeze("manifoldpipe")
    layerfreeze28 ← layer_freeze("manifoldelbow")
    layerfreeze29 ← layer_freeze("inletpipe")
    layerfreeze30 ← layer_freeze("launder coupling")
    layerfreeze31 ← layer_freeze("launder cap")
    layerfreeze32 ← layer_freeze("seddrainadapter")
    layerfreeze33 ← layer_freeze("seddrainvalves")
    layerfreeze34 ← layer_freeze("launderorificecap")
    layerfreeze35 ← layer_freeze("laundercouplingcap")
    bigunion ← union_allA
    layerset ← layer_set("0")
    one ← stack(layerthaw1, layerthaw2, layerthaw2e, layerthaw3, layerthaw4, layerthaw5, layerthaw6, layerthaw8, layerthaw9, layerthaw10, layerthaw11, layerthaw12, layerthaw13, layerthaw14, layerthaw15, layerthaw16, layerthaw17, layerthaw18, layerthaw19, layerthaw20, layerthaw21, layerthaw22)
    two ← stack(viewtop, arraytank1)
    three ← stack(layerfreeze13, layerfreeze14, layerfreeze15, layerfreeze16, layerfreeze17, layerfreeze18, layerfreeze19, layerfreeze21, layerfreeze22, layerfreeze23, layerfreeze24, layerfreeze25, layerfreeze26, layerfreeze27, layerfreeze28, layerfreeze29, layerfreeze30, layerfreeze31, layerfreeze32, layerfreeze33, layerfreeze34, layerfreeze35, bigunion, layerset, layerthaw2, bigunion, layerset, layerfreeze14, layerthaw2e, bigunion, layerset, layerfreeze15)
    return stack(one, two, three)
Sedtankopenchannelscript :=
    layerthawtank ← layer_thaw("tank")
    layerthawchannel ← layer_thaw("channel")
    viewtop1 ← viewtop1
    box1 ← box(channelbox_origin, [
        channelbox_origin[0] + channelbox_dim[0];
        channelbox_origin[1] + channelbox_dim[1];
        channelbox_origin[2] + channelbox_dim[2]
    ])
    subtract1 ← subtractD(Plant_Origin, channelbox_origin)
    box2 ← box(echannelbox_origin, [
        echannelbox_origin[0] + echannelbox_dim[0];
        echannelbox_origin[1] + echannelbox_dim[1];
        echannelbox_origin[2] + echannelbox_dim[2]
    ])
    subtract2 ← subtractD([Plant_Origin[0] + T_PlantWall; Plant_Origin[1]; Plant_Origin[2]], echannelbox_origin)
    layerset1 ← layer_set("channel")
    box3 ← box(channelclosebox_origin, channelclosebox_origin + channelclosebox_dim)
    bigunion ← union_allA
    layerset ← layer_set("0")
    layerfreezechannel ← layer_freeze("channel")
    layerfreezetank ← layer_freeze("tank")
    one ← stack(layerthawtank, viewtop1, bigunion, box1, subtract1, box2, subtract2, layerset, layerfreezetank)
    return one
sedtankconnectingpipe_origin :=
    if sedlayout == 2
        origin ← [
            Plant_Origin[0] - TeeLength(ND_PltWeir) - ShortTeeLength(ND_PltWeir);
            Plant_Origin[1] - T_PlantWall - S_Elbow - ConRadius(ND_PltWeir);
            Plant_Origin[2]
        ]
    return ← origin
exitpipe_origin := [-1.63 m; H_Sed - H_ExitChannel + outerradius(ND_PltWeir); -exitweirpipe_length + 8 in] = [-1.63; 1.47869; -1.28932] m
exitweirpipe2_length := H_Sed - H_ExitChannel + H_PltWeir - ElbowRadius(ND_PltWeir) - ConRadius(ND_PltWeir) = 1.40679 m
sedechanneltankscript :=
    viewtope ← viewtop1
    layernewect ← layer_new("echanneltank", ltgrey)
    tankect ← Tank(echanneltank_origin, echanneltank_dim, T_PlantWall)
    boxect ← box(echannelbox_origin, echannelbox_origin + echannelbox_dim)
    subtractect ← subtractD(echanneltank_origin, echannelbox_origin)
    layerset ← layer_set("0")
    layerfreezeect ← layer_freeze("echanneltank")
    layernewewe ← layer_new("exitweirtee", green)
    elbowewe ← elbow(sedtankexitweirelbow_origin, ND_PltWeir, EN_PipeSpec)
    rotateewe1 ← rotate_3d([
        sedtankexitweirelbow_origin[0] + ElbowRadius(ND_PltWeir);
        sedtankexitweirelbow_origin[1];
        sedtankexitweirelbow_origin[2] - outerradius(ND_PltWeir)
    ], sedtankexitweirelbow_origin, "y", 90)
    rotateewe2 ← rotate_3d([
        sedtankexitweirelbow_origin[0];
        sedtankexitweirelbow_origin[1] + ElbowRadius(ND_PltWeir) - outerradius(ND_PltWeir);
        sedtankexitweirelbow_origin[2]
    ], sedtankexitweirelbow_origin, "z", 90)
    elbowewe2 ← elbow(sedtankexitweirelbow2_origin, ND_PltWeir, EN_PipeSpec)
    rotateewe21 ← rotate_3d([
        sedtankexitweirelbow2_origin[0] + ElbowRadius(ND_PltWeir);
        sedtankexitweirelbow2_origin[1];
        sedtankexitweirelbow2_origin[2] - outerradius(ND_PltWeir)
    ], sedtankexitweirelbow2_origin, "y", 90)
    rotateewe22 ← rotate_3d([
        sedtankexitweirelbow2_origin[0];
        sedtankexitweirelbow2_origin[1] + ElbowRadius(ND_PltWeir) - outerradius(ND_PltWeir);
        sedtankexitweirelbow2_origin[2]
    ], sedtankexitweirelbow2_origin, "z", 90)
    layerfreezeewe ← layer_freeze("exitweirtee")
    layernewewp ← layer_new("exitweir", blue)
    pipeewp ← Pipe(exitweirpipe_origin, ND_PltWeir, exitweirpipe_length, EN_PipeSpec)
    pipeewp2 ← Pipe(exitweirpipe2_origin, ND_PltWeir, exitweirpipe2_length, EN_PipeSpec)
    layerfreezeewp ← layer_freeze("exitweir")
    layernewconnpipe ← layer_new("connecting pipe", blue)
    pipecon ← Pipe(sedtankconnectingpipe_origin, ND_PltWeir, connectingpipe_length, EN_PipeSpec)
    rotatepipecon ← rotate_3d([
        sedtankconnectingpipe_origin[0] + outerradius(ND_PltWeir);
        sedtankconnectingpipe_origin[1];
        sedtankconnectingpipe_origin[2] + connectingpipe_length
    ], sedtankconnectingpipe_origin, "y", 270)
    layerfreezepipecon ← layer_freeze("connecting pipe")
    newlayer ← layer_new("exitpipe", blue)
    layerthaw ← layer_thaw("exitchanneltank")
    cylinder ← cylinderD(exitpipe_origin, outerradius(ND_PltWeir), exitpipe_origin + [0 m; 0 m; exitweirpipe_length])
    subtract ← subtractD(echannelbox_origin, exitpipe_origin)
    freezelayer ← layer_freeze("exitchanneltank")
    newpipe ← Pipe(exitpipe_origin, ND_PltWeir, exitweirpipe_length, EN_PipeSpec)
    set ← layer_set("0")
    newfreeze ← layer_freeze("exitpipe")
    one ← stack(viewtope, layernewect, tankect, boxect, subtractect, layerset, layerfreezeect, layernewewe, elbowewe, rotateewe1, rotateewe2, elbowewe2, rotateewe21, rotateewe22, layerset, layerfreezeewe, layernewewp, pipeewp, pipeewp2, layerset, layerfreezeewp, layernewconnpipe, pipecon, rotatepipecon, layerset, layerfreezepipecon)
    return one
    = [
        "_-view o t";
        "-layer m echanneltank";
        "c t 214,214,214";
        "echanneltank";
        "  ";
        "_-view o t _zoom w 0.16,-0.86386,1.39455 -0.57641,0.01,1.82636 _box 0,-0.70386,1.39455 -0.41641,-0.15,1.82636 _box 0.15,-0.85386,1.24455 -0.56641,0,1.82636 _subtract 0.15,-0.85386,1.24455  0,-0.70386,1.39455 ";
        "_box -0.41641,-0.15,1.39455 0,8.93,1.82636";
        "_subtract 0,-0.70386,1.39455  -0.41641,-0.15,1.39455 ";
        "-layer s 0";
        "  "
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    ]
sedichanneltankscript :=
    viewtopi ← viewtop1
    layernewict ← layer_new("ichanneltank", ltgrey)
    tankict ← Tank(ichanneltank_origin, ichanneltank_dim, T_PlantWall)
    boxict ← box(channelbox_origin, channelbox_origin + channelbox_dim)
    subtractict ← subtractD(ichanneltank_origin, channelbox_origin)
    layerset ← layer_set("0")
    layerfreezeict ← layer_freeze("ichanneltank")
    layernewiwe ← layer_new("inletweirtee", green)
    teeiwt ← Tee2(sedtankinletweirelbow_origin, ND_PltWeir, EN_PipeSpec)
    rotateiwe1 ← rotate_3dAll([
        sedtankinletweirelbow_origin[0];
        sedtankinletweirelbow_origin[2] + ShortTeeLength(ND_PltWeir);
        sedtankinletweirelbow_origin[1]
    ], "z", 0)
    layernewiwp ← layer_new("inletweir", blue)
    pipeiwp ← Pipe(inletweirpipe_origin, ND_PltWeir, inletweirpipe_length, EN_PipeSpec)
    layerfreezeiwp ← layer_freeze("inletweir")
    layerfreezeiwt ← layer_freeze("inletweirtee")
    one ← stack(viewtopi, layernewict, tankict, boxict, subtractict, layerset, layerfreezeict, layernewiwe, teeiwt, rotateiwe1, layerset, viewtopi, layernewiwp, pipeiwp, layerset, layerfreezeiwp, layerfreezeiwt)
    return one
weirpipescapsscript :=
    viewtops ← viewtop1
    layerweircaps ← layer_new("weirpipecap", dkgrey)
    iweircap ← cap(inletweirpipe_origin + [0; 0; inletweirpipe_length], ND_PltWeir, EN_PipeSpec)
    eweircap1 ← cap(exitweirpipe_origin + [0; 0; exitweirpipe_length], ND_PltWeir, EN_PipeSpec)
    eweircap2 ← cap(exitweirpipe2_origin + [0; 0; exitweirpipe2_length], ND_PltWeir, EN_PipeSpec)
    layerset0 ← layer_set("0")
    layerfreezecaps ← layer_freeze("weirpipecap")
    one ← stack(viewtops, layerweircaps, iweircap, eweircap1, eweircap2, viewtops, layerset0, layerfreezecaps)
    return one
text := textbox(H_Text, textbox_origin, textbox_origin + textbox_dim, Disclaimer) = ["textsize 0.05"; "-mtext -7.12918,1.06 -5.34688,2.12 Disclaimer: This drawing is a PRELIMINARY DESIGN and must be reviewed and approved by a professional engineer."; ""]
AC_SedTank :=
    stack(Sedtanktankscript, Sedtanksubtractchannelscript, Sedtankexitchannelscript, Sedtankexitweirscript, Sedtankinletweirscript, Sedtankinletchannelscript, Seddrainslopescript, Seddrainadapterscript, Seddrainvalvescript, Sedbottomslopescript, influentmanifoldscript, inletpipescript, Orificescript, Draincoverscript, Sedtanklaminascript, Pipeframescript, SedLaunderscript, launderholes, Sedtankarrayscript, Sedtankopenchannelscript, sedichanneltankscript, sedechanneltankscript, weirpipescapsscript, text) if (N_SedBays > 1 and N_SedTanks > 1)
    stack(Sedtanktankscript, Sedtanksubtractchannelscript, Sedtankexitchannelscript, Sedtankexitweirscript, Sedtankinletweirscript, Sedtankinletchannelscript, Seddrainslopescript, Seddrainadapterscript, Seddrainvalvescript, Sedbottomslopescript, influentmanifoldscript, inletpipescript, Orificescript, Draincoverscript, Sedtanklaminascript, Pipeframescript, SedLaunderscript, launderholes, Sedtankarrayscript, Sedtankopenchannelscript, sedichanneltankscript, sedechanneltankscript, weirpipescapsscript, text) if (N_SedBays ≤ 1 and N_SedTanks > 1)
    stack(Sedtanktankscript, Sedtanksubtractchannelscript, Sedtankexitchannelscript, Sedtankexitweirscript, Sedtankinletweirscript, Sedtankinletchannelscript, Seddrainslopescript, Seddrainadapterscript, Seddrainvalvescript, Sedbottomslopescript, influentmanifoldscript, inletpipescript, Orificescript, Draincoverscript, Sedtanklaminascript, Pipeframescript, SedLaunderscript, launderholes, Sedtankopenchannelscript, sedichanneltankscript, sedechanneltankscript, weirpipescapsscript, text) if (N_SedBays == 1 and N_SedTanks == 1)
    stack(Sedtanktankscript, Sedtanksubtractchannelscript, Sedtankexitchannelscript, Sedtankexitweirscript, Sedtankinletweirscript, Sedtankinletchannelscript, Seddrainslopescript, Seddrainadapterscript, Seddrainvalvescript, Sedbottomslopescript, influentmanifoldscript, inletpipescript, Orificescript, Draincoverscript, Sedtanklaminascript, Pipeframescript, SedLaunderscript, launderholes, Sedtankopenchannelscript, sedichanneltankscript, sedechanneltankscript, weirpipescapsscript, text) if (N_SedBays > 1 and N_SedTanks == 1)
# [component: inputs AC_SedTank]
