# [reference: MasterProgram.xmcd]
T_LaunderCap := outerradius(ND_SedLaunder) - innerdiameter(ND_SedLaunder, EN_PipeSpec)/2
L_SedLaunder :=
    (L_Sed - W_InletChannel - W_ExitChannel - T_ChannelWall - CouplingLength(ND_SedLaunder) - CouplingLengthFlex(ND_SedLaunder) + SocketDepthFlex(ND_SedLaunder)) - T_LaunderCap if CouplingLength(ND_SedLaunder) ≥ T_ChannelWall
    (L_Sed - W_InletChannel - W_ExitChannel - 2*T_ChannelWall - CouplingLengthFlex(ND_SedLaunder) + SocketDepthFlex(ND_SedLaunder)) - T_LaunderCap otherwise
PVCCouplingNew_origin := [
    Plant_Origin[0] - W_ExitChannel - SocketDepth(ND_SedLaunder);
    Plant_Origin[1] + W_Sed/(N_SedLaunders*N_SedBays*2);
    Plant_Origin[2] + HW_Sed - H_SedAbove + outerradius(ND_SedLaunder)
]
FlexCouplingNew_origin := [
    {
        (Plant_Origin[0] - W_ExitChannel - CouplingLength(ND_SedLaunder)) if CouplingLength(ND_SedLaunder) ≥ T_PlantWall
        Plant_Origin[0] otherwise
    };
    Plant_Origin[1] + W_Sed/(N_SedLaunders*N_SedBays*2);
    Plant_Origin[2] + HW_Sed - H_SedAbove + outerradius(ND_SedLaunder)
]
SedLaunderNippleNew_origin := [
    PVCCouplingNew_origin[0] - CouplingLength(ND_SedLaunder) + 2*SocketDepth(ND_SedLaunder);
    Plant_Origin[1] + W_Sed/(N_SedLaunders*N_SedBays*2);
    Plant_Origin[2] + HW_Sed - H_SedAbove + outerradius(ND_SedLaunder)
]
SedLaunderNew_origin := [
    FlexCouplingNew_origin[0] - SocketDepthFlex(ND_SedLaunder);
    Plant_Origin[1] + W_Sed/(N_SedLaunders*N_SedBays*2);
    Plant_Origin[2] + HW_Sed - H_SedAbove + outerradius(ND_SedLaunder)
]
LaunderCapNew_origin := [
    SedLaunderNew_origin[0] - L_SedLaunder;
    Plant_Origin[1] + W_Sed/(N_SedLaunders*N_SedBays*2);
    Plant_Origin[2] + HW_Sed - H_SedAbove + outerradius(ND_SedLaunder)
]
LengthSedLaunderNipple :=
    (SocketDepth(ND_SedLaunder) + SocketDepthFlex(ND_SedLaunder)) if CouplingLength(ND_SedLaunder) ≥ T_PlantWall
    (SocketDepth(ND_SedLaunder) + SocketDepthFlex(ND_SedLaunder) + (T_PlantWall - CouplingLength(ND_SedLaunder))) otherwise
T_PVCCoupling := T_LaunderCap
# Automated Design: AutoCAD: Sedimentation Tank
# Dimension Values
channelbox_dim :=
    dim ← [W_InletChannel; (N_SedTanks*W_Sed) + ((N_SedTanks + 1)*T_PlantWall); H_InletChannel] if sedlayout == 2
    dim ← [W_InletChannel; N_SedTanks*(W_Sed + T_PlantWall); H_InletChannel] if sedlayout == 3
    return dim
echannelbox_dim := [W_ExitChannel; N_SedTanks*(W_Sed + T_PlantWall); H_ExitChannel]
channelinletbox1_dim := [T_PlantWall; W_InletChannel + T_PlantWall; H_InletChannel]
channelinletbox2_dim := [W_InletChannel; W_Sed; H_Sed]
sedbottombox_dim := [-L_Sed; W_Sed; T_PlantWall]
channelclosebox_dim := [W_InletChannel + T_ChannelWall + T_PlantWall; T_PlantWall; H_InletChannel + T_ChannelWall]
channelinletwall_dim := [T_ChannelWall; W_Sed; H_Sed]
# The minimum function ensures that the control box is at least as wide as the channel that it is connected to. If need be it can be even wider if the plumbing connections require it to be wider.
echanneltank_dim := [W_ExitChannel; 4*ConRadius(ND_PltWeir) + 3*S_Elbow; H_ExitChannel]
echanneltankbox_dim := [
    -W_ExitChannel;
    4*ConRadius(ND_PltWeir) + 3*S_Elbow;
    ConRadius(ND_PltWeir) + ElbowRadius(ND_PltWeir) + SocketDepth(ND_PltWeir)
]  # I replaced
S_Elbow + ElbowRadius(ND_PltWeir) + ConRadius(ND_PltWeir) + SocketDepth(ND_PltWeir)
ichanneltank_dim := [W_InletChannel; (2*ConRadius(ND_PltWeir)) + (2*S_Elbow); H_InletChannel]
with
W_InletChannel
# W_ExitChannel | or
# in the four functions at the left.
ichanneltankbox_dim := [
    -W_InletChannel;
    (2*ConRadius(ND_PltWeir)) + (2*S_Elbow);
    ConRadius(ND_PltWeir) + ElbowRadius(ND_PltWeir) + SocketDepth(ND_PltWeir)
]
framewall_dim := [-L_Sed; T_ConcreteMin; -H_SedFrameWall]  # error: This variable is undefined.
textbox_dim := [L_Sed/2; W_SedBay]
sedweirexit_dim := [W_SedWeirExit; H_SedWeirExit; T_SedWeir] = [2.42; 0.28409; 0.1] m
sedweirinlet_dim := [W_SedWeirInlet; H_SedWeirInlet; T_SedWeir] = [2.42; 0.32409; 0.1] m
seddrainslope_dim := [sqrt(3)*H_SedSlope; D_SedDrainValve; -H_SedSlope]
# Origins Points
channel_origin := [
    Plant_Origin[0] - L_Sed + W_InletChannel;
    Plant_Origin[1] - T_PlantWall;
    Plant_Origin[2] + H_Sed - H_InletChannel
] = [-12.657; -0.15; 1.38823] m
echannel_origin :=
    origin ← [0; 0; 0]*m
    origin ← [Plant_Origin[0]; Plant_Origin[1] - T_PlantWall; Plant_Origin[2] + H_Sed - H_ExitChannel] if sedlayout == 2
    if sedlayout == 3
        origin ← [
            Plant_Origin[0] - L_Sed + W_InletChannel + T_ChannelWall + W_ExitChannel;
            Plant_Origin[1] - T_PlantWall;
            Plant_Origin[2] + H_Sed - H_ExitChannel
        ]
    if sedlayout == 4
        origin ← [
            Plant_Origin[0] - L_Sed + W_InletChannel + T_ChannelWall + W_ExitChannel;
            Plant_Origin[1] - T_PlantWall;
            Plant_Origin[2] + H_Sed - H_ExitChannel
        ]
    return origin
channelinletwall_origin := [Plant_Origin[0] - L_Sed + W_InletChannel; Plant_Origin[1]; Plant_Origin[2]]
isubtractbox_origin := [Plant_Origin[0] - L_Sed + W_InletChannel; Plant_Origin[1]; Plant_Origin[2] + H_Sed]
echanneltank_origin :=
    if sedlayout == 2
        origin ← [
            Plant_Origin[0];
            Plant_Origin[1] - T_PlantWall - (4*ConRadius(ND_PltWeir)) - (3*S_Elbow);
            Plant_Origin[2] + H_Sed - H_ExitChannel
        ]
    if sedlayout == 3
        origin ← [
            Plant_Origin[0] - L_Sed + W_InletChannel + T_ChannelWall + S_Elbow + ElbowRadius(ND_PltWeir) + ConRadius(ND_PltWeir) + SocketDepth(ND_PltWeir);
            Plant_Origin[1] - T_PlantWall - (4*ConRadius(ND_PltWeir)) - (3*S_Elbow);
            Plant_Origin[2] + H_Sed - H_ExitChannel
        ]
    origin
ichanneltank_origin :=
    if sedlayout == 2
        origin ← [
            Plant_Origin[0] - L_Sed - T_PlantWall + ichanneltank_dim[0] + T_PlantWall;
            Plant_Origin[1] - T_PlantWall - (2*ConRadius(ND_PltWeir)) - (2*S_Elbow);
            Plant_Origin[2] + H_Sed - H_InletChannel
        ]
    if sedlayout == 3
        origin ← [
            (Plant_Origin[0] - L_Sed + W_InletChannel) + T_ChannelWall;
            Plant_Origin[1] - T_PlantWall - (2*ConRadius(ND_PltWeir)) - (2*S_Elbow);
            Plant_Origin[2] + H_Sed - H_InletChannel
        ]
    origin
    = [-12.657; -0.45193; 1.38823] m
channelbox_origin := [Plant_Origin[0] - L_Sed; Plant_Origin[1] - T_PlantWall; Plant_Origin[2] + H_Sed - H_InletChannel]
echannelbox_origin :=
    origin ← [0; 0; 0]*m
    if sedlayout == 2
        origin ← [
            Plant_Origin[0] - W_ExitChannel;
            Plant_Origin[1] - T_PlantWall;
            Plant_Origin[2] + H_Sed - H_ExitChannel
        ]
    if sedlayout == 3
        origin ← [
            Plant_Origin[0] - L_Sed + W_InletChannel + T_ChannelWall;
            Plant_Origin[1] - T_PlantWall;
            Plant_Origin[2] + H_Sed - H_ExitChannel
        ]
    if sedlayout == 4
        origin ← [
            Plant_Origin[0] - L_Sed + W_InletChannel + T_ChannelWall;
            Plant_Origin[1] - T_PlantWall;
            Plant_Origin[2] + H_Sed - H_ExitChannel
        ]
    return origin
channelinletbox1_origin := [
    Plant_Origin[0] - L_Sed - T_PlantWall;
    Plant_Origin[1] + (.5*W_Sed) - (.5*W_InletChannel + T_PlantWall);
    Plant_Origin[2] + H_Sed - H_InletChannel
]
channelinletbox2_origin := [Plant_Origin[0] - L_Sed; Plant_Origin[1]; Plant_Origin[2]]
channelclosebox_origin := [
    Plant_Origin[0] - L_Sed - T_PlantWall - W_InletChannel - T_ChannelWall;
    Plant_Origin[1] - T_PlantWall;
    Plant_Origin[2] + H_Sed - H_InletChannel - T_ChannelWall
]
sedtankinletweirelbow_origin := [
    Plant_Origin[0] - L_Sed + (S_Elbow + ConRadius(ND_PltWeir));
    Plant_Origin[1] - T_PlantWall - S_Elbow - ConRadius(ND_PltWeir);
    Plant_Origin[2] - ShortTeeLength(ND_PltWeir)
] = [-13.1288; -0.300965; -0.142875] m
sedtankexitweirelbow_origin :=
    if sedlayout == 2
        origin ← [
            Plant_Origin[0] - SocketDepth(ND_PltWeir) - 2*ElbowRadius(ND_PltWeir);
            Plant_Origin[1] - T_PlantWall - S_Elbow - ConRadius(ND_PltWeir);
            Plant_Origin[2] + ElbowRadius(ND_PltWeir)
        ]
    if sedlayout == 3
        origin ← [
            Plant_Origin[0] - L_Sed + W_InletChannel + T_ChannelWall + echanneltank_dim[0] - SocketDepth(ND_PltWeir);
            Plant_Origin[1] - T_PlantWall - S_Elbow - ConRadius(ND_PltWeir);
            Plant_Origin[2] + ElbowRadius(ND_PltWeir)
        ]
    return ← origin
sedtankexitweirelbow2_origin :=
    if sedlayout == 2
        origin ← [
            Plant_Origin[0] - SocketDepth(ND_PltWeir);
            Plant_Origin[1] - T_PlantWall - 2*S_Elbow - 3*ConRadius(ND_PltWeir);
            Plant_Origin[2] + ElbowRadius(ND_PltWeir)
        ]
    if sedlayout == 3
        origin ← [
            Plant_Origin[0] - L_Sed + W_InletChannel + T_ChannelWall + echanneltank_dim[0] - SocketDepth(ND_PltWeir);
            Plant_Origin[1] - T_PlantWall - S_Elbow - ConRadius(ND_PltWeir);
            Plant_Origin[2] + ElbowRadius(ND_PltWeir)
        ]
    return ← origin
exitweirpipecopy1_point :=
    if sedlayout == 2
        point ← [
            Plant_Origin[0] - SocketDepth(ND_PltWeir) - ElbowRadius(ND_PltWeir) - innerR(ND_PltWeir, EN_PipeSpec);
            Plant_Origin[1] - T_PlantWall - S_Elbow - ConRadius(ND_PltWeir);
            Plant_Origin[2] + ElbowRadius(ND_PltWeir)
        ]
    if sedlayout == 3
        point ← [
            Plant_Origin[0] - L_Sed + W_InletChannel + T_ChannelWall + echanneltank_dim[0] - SocketDepth(ND_PltWeir) - ElbowRadius(ND_PltWeir) - innerR(ND_PltWeir, EN_PipeSpec);
            Plant_Origin[1] - T_PlantWall - S_Elbow - ConRadius(ND_PltWeir);
            Plant_Origin[2] + ElbowRadius(ND_PltWeir)
        ]
    return point
exitweirpipecopy2_point :=
    if sedlayout == 2
        point ← [
            Plant_Origin[0] - SocketDepth(ND_PltWeir) - ElbowRadius(ND_PltWeir) - innerR(ND_PltWeir, EN_PipeSpec);
            Plant_Origin[1] - T_PlantWall - 2*S_Elbow - 3*ConRadius(ND_PltWeir);
            Plant_Origin[2] + ElbowRadius(ND_PltWeir)
        ]
    if sedlayout == 3
        point ← [
            Plant_Origin[0] - L_Sed + W_InletChannel + T_ChannelWall + echanneltank_dim[0] - SocketDepth(ND_PltWeir) - ElbowRadius(ND_PltWeir) - innerR(ND_PltWeir, EN_PipeSpec);
            Plant_Origin[1] - T_PlantWall - 2*S_Elbow - 3*ConRadius(ND_PltWeir);
            Plant_Origin[2] + ElbowRadius(ND_PltWeir)
        ]
    return point
ElbowRadius(ND_PltWeir) = 0.2286 m
sedtankinletpipe1_origin := [
    Plant_Origin[0] - L_Sed + (.5*W_InletChannel);
    Plant_Origin[1] + (W_Sed/(2*N_SedInletPipes*N_SedBays));
    Plant_Origin[2] + H_Sed - H_InletChannel
]
inletweirpipe_origin := [
    Plant_Origin[0] - L_Sed + S_Elbow + ConRadius(ND_PltWeir);
    Plant_Origin[1] - T_PlantWall - S_Elbow - ConRadius(ND_PltWeir);
    Plant_Origin[2] + ShortTeeLength(ND_PltWeir)
] = [-13.1288; -0.300965; 0.142875] m
sedtankinletweirelbow_origin = [-13.1288; -0.300965; -0.142875] m
exitweirpipe_origin :=
    if sedlayout == 2
        origin ← [
            Plant_Origin[0] - ElbowRadius(ND_PltWeir) - SocketDepth(ND_PltWeir);
            Plant_Origin[1] - T_PlantWall - S_Elbow - ConRadius(ND_PltWeir);
            Plant_Origin[2] + ElbowRadius(ND_PltWeir)
        ]
    if sedlayout == 3
        origin ← [
            Plant_Origin[0] - L_Sed + W_InletChannel + T_ChannelWall + S_Elbow + ConRadius(ND_PltWeir);
            Plant_Origin[1] - T_PlantWall - S_Elbow - ConRadius(ND_PltWeir);
            Plant_Origin[2] + ElbowRadius(ND_PltWeir)
        ]
    return ← origin
Sedbottomslopes_origin := [0; 0; 0]
Sedbottomslopes_dim := [
    Sedbottomslopes_origin[0] + W_SedBay;
    Sedbottomslopes_origin[1] + H_SedSludge + T_SedSludge;
    Sedbottomslopes_origin[2] + L_Sed
]
Sedbottomslopes_dim[0]/2 - W_SedSludge/2 = 0.432121 m
SedDrain_origin := [
    Sedbottomslopes_origin[0] + Sedbottomslopes_dim[0]/2 - W_SedSludge/2;
    Sedbottomslopes_origin[1];
    Sedbottomslopes_origin[2]
]
SedDrain_dim := [SedDrain_origin[0] + W_SedSludge; SedDrain_origin[1] + H_SedSludge; SedDrain_origin[2] + L_Sed]
W_SedInletBottom = 0.382121 m
SedDrainCover_origin := [
    Sedbottomslopes_origin[0] + Sedbottomslopes_dim[0]/2 - W_SedDrainCover/2;
    Sedbottomslopes_origin[1] + H_SedSludge;
    Sedbottomslopes_origin[2]
]
SedDrainCover_dim := [
    SedDrainCover_origin[0] + W_SedDrainCover;
    SedDrainCover_origin[1] + T_SedSludge;
    SedDrainCover_origin[2] + L_Sed
]
Sedbottomslopeslope_origin := [
    Sedbottomslopes_origin[0] + W_SedInletBottom;
    Sedbottomslopes_origin[1] + Sedbottomslopes_dim[1];
    Sedbottomslopes_origin[2]
] = [0.382121; 0.147879; 0] m
SedTankDivider_Origin := [Plant_Origin[0]; Plant_Origin[1] + W_Sed; Plant_Origin[2]]
SedTankDivider_Dim := [
    SedTankDivider_Origin[0] - L_Sed;
    SedTankDivider_Origin[1] + T_PlantWall;
    SedTankDivider_Origin[2] + H_SedBayDivider
] = [-13.2798; 2.27; 0.951389] m
DrainCover_origin := [Plant_Origin[0]; Plant_Origin[1] + W_SedInletBottom; Plant_Origin[2] + H_SedSludge] = [0; 0.382121; 0.0978788] m
iccoupling_origin := [-L_Sed + W_InletChannelEst/2; W_Sed - (W_SedBay/2); H_Sed - H_InletChannel] = [-13.0555; 1.59; 1.38823] m
manifoldpipe_origin := [
    W_Sed - (W_SedBay/2);
    Z_SedManifoldPipe;
    -L_Sed + W_InletChannelEst/2 + ElbowRadius(ND_SedManifold)
] = [1.59; 0.342189; -12.5983] m
manifoldelbow_origin := [-L_Sed + W_InletChannelEst/2; W_Sed - W_SedBay/2 - ElbowRadius(ND_SedManifold); Z_SedManifoldPipe]
lamina_origin := [
    Plant_Origin[0] - L_Sed + W_InletChannel + T_ChannelWall + L_SedPlate*cos(AN_SedPlate);
    Plant_Origin[1];
    Plant_Origin[2] + H_SedBayDivider + outerdiameter(ND_SedPlateFrame)
] = [-12.2784; 0; 0.999649] m  # These are the assumed dimensions for the frame that supports the lamella, they should probably be defined somewhere else.
pipeframe_origin := [
    Plant_Origin[0] - L_Sed + W_InletChannel + L_SedPlate*cos(AN_SedPlate) + T_ChannelWall - 2*zc;
    H_SedBayDivider + outerdiameter(ND_SedPlateFrame)/2;
    Plant_Origin[2]
]
# [component: inputs SedLaunder_origin]
# [component: inputs SedLaunder_origin]
SedLaunder_origin := [
    Plant_Origin[0] - W_ExitChannel - T_ChannelWall - L_SedLaunder + SocketDepth(ND_SedLaunder);
    Plant_Origin[1] + W_Sed/(N_SedLaunders*N_SedBays*2);
    Plant_Origin[2] + HW_Sed - H_SedAbove + outerradius(ND_SedLaunder)
] = [-12.2983; 0.53; 1.59518] m
SedLaunderOrifice_origin := [SedLaunder_origin[0]; SedLaunder_origin[1]; SedLaunder_origin[2] + L_Sed - B_SedLaunderOrifices]
textbox_origin := [-2*L_Sed; W_SedBay]
sedweirexit_origin := [
    {
        -W_ExitChannel if Geom_ExitChannel == Perpindicular_Weir
        -T_PlantWall otherwise
    };
    H_Sed - H_ExitChannel;
    {
        T_PlantWall - T_SedWeir if Geom_ExitChannel == Perpindicular_Weir
        -w_minchannelHL(H_SedWeirExit, HW_ExitChannel, Q_Plant, L_Channel, Nu_Water, E_Concrete, 1, HL_SedWeirExit) - T_SedWeir otherwise
    }
]
sedweirinlet_origin := [
    {
        -L_Sed if EN_InletChannelGeom == Perpindicular_Weir
        -T_PlantWall otherwise
    };
    H_Sed - H_InletChannel;
    {
        T_PlantWall - T_SedWeir if EN_InletChannelGeom == Perpindicular_Weir
        -L_Sed + W_InletChannelEst otherwise
    }
]
FlocHopper_origin := [0; 0; 0]
FlocHopperBox_dim := [L_FlocHopper; T_FlocHopper; H_FlocHopper]  # error: This variable is undefined.
FlocHopperWedge_dim := [(L_FlocHopper - W_FlocHopper)/2; T_FlocHopper; FlocHopper_origin[2]]  # error: This variable is undefined.
isubractbox_dim := [W_InletChannel; T_PlantWall; H_InletChannel]
inletweirpipe_length := H_Sed - H_InletChannel + HW_InletChannel - ElbowRadius(ND_PltWeir) - ConRadius(ND_PltWeir) = 1.41155 m
exitweirpipe_length := H_Sed - H_ExitChannel + H_PltWeir - ElbowRadius(ND_PltWeir) - ConRadius(ND_PltWeir)
connectingpipe_length := -((Plant_Origin[0] - L_Sed + S_Elbow + ConRadius(ND_PltWeir) + ShortTeeLength(ND_PltWeir)) - (Plant_Origin[0] - SocketDepth(ND_PltWeir) - 2*ElbowRadius(ND_PltWeir))) = 12.4717 m
seddrainslope_dim := [sqrt(3)*H_SedSlope; D_SedDrainValve; -H_SedSlope]
# Sedtank Scripts
Sedtanktankscript :=
    ViewTops ← viewtop1
    New ← layer_new("tank", grey)
    Tank ← Tank(Plant_Origin, [L_Sed; W_Sed; H_Sed], T_PlantWall)
    FreezeTank ← FreezeLayer("tank")
    Wedge ← WedgeF([Plant_Origin[0] - L_Sed; W_SedBay*N_SedBays - 0.5*W_SedBay - D_SedDrainValve/2; 0 m], seddrainslope_dim + [Plant_Origin[0] - L_Sed; W_SedBay*N_SedBays - 0.5*W_SedBay - D_SedDrainValve/2; 0 m], [0; 0; 0]*deg)
    ArrayBay ← concat("-array", sp, "ALL", sp, sp, "r", sp, stringit_nounits(N_SedBays), sp, "1", sp, stringit(-W_SedBay))
    Group ← GroupAll("DeleteMe")
    SubtractSlopes ← SubtractF(["tank"], "DeleteMe")
    one ←
        stack(ViewTops, New, Tank, FreezeTank, Wedge, ArrayBay, Group, SubtractSlopes) if N_SedBays > 1
        stack(ViewTops, New, Tank, FreezeTank, Wedge, Group, SubtractSlopes) otherwise
    return one
Sedtanksubtractchannelscript :=
    viewfront ← viewfront1
    box1 ← box([-L_Sed + T_ChannelWall; H_Sed - H_InletChannel; T_PlantWall + zc], [-L_Sed + T_ChannelWall + W_InletChannel; H_Sed; -L_Channel - zc])
    layerthaw ← layer_thaw("tank")
    layerset ← layer_set("tank")
    subtract1 ← subtractD(Plant_Origin, [-L_Sed + T_ChannelWall + W_InletChannel; H_Sed; -L_Channel + T_PlantWall + zc])
    box2 ← box([-W_ExitChannel; H_Sed - H_ExitChannel; T_PlantWall + zc], [Plant_Origin[0]; H_Sed; -L_Channel - zc])
    subtract2 ← subtractD(Plant_Origin, [Plant_Origin[0]; H_Sed; -L_Channel - zc])
    viewtop ← viewtop1
    layerset2 ← layer_set("0")
    layerfreeze1 ← layer_freeze("tank")
    one ← stack(viewfront, box1, layerthaw, layerset, subtract1, box2, subtract2, viewtop, layerset2, layerfreeze1)
    return one
Sedtankexitchannelscript :=
    layer2 ← layer_new("echannel", ltgrey)
    channel1 ← ChannelDrawing(echannel_origin, [W_Sed + 2*T_PlantWall; W_ExitChannel; H_ExitChannel], T_ChannelWall)
    rotate1 ← rotate(echannel_origin, 90)
    bigunion ← union_allA
    layerset ← layer_set("0")
    layerfreeze2 ← layer_freeze("echannel")
    one ← stack(layer2, channel1, rotate1, bigunion, layerset, layerfreeze2)
    return ← one
Sedtankexitweirscriptparallel :=
    viewright ← viewrightside1
    layerset ← layer_set("0")
    box1 ← box(Plant_Origin, sedweirexit_dim)
    move1 ← move_all(Plant_Origin, sedweirexit_origin)
    layernew1 ← layer_new("sedweirexit", ltgrey)
    layerfreeze ← layer_freeze("0")
    viewfront ← viewfront1
    box2 ← box(Plant_Origin, [W_ExitChannelMin + T_SedWeir; H_ExitChannel; sedweirexit_dim[2]])
    move2 ← move_all(Plant_Origin, [-W_ExitChannel; sedweirexit_origin[1]; T_PlantWall - T_SedWeir])
    layerthaw2 ← layer_thaw("0")
    union1 ← union_allA
    layerset ← layer_set("0")
    layerfreeze2 ← layer_freeze("sedweirexit")
    viewtop ← viewtop1
    one ← stack(viewright, layerset, box1, move1, layernew1, layerfreeze, viewfront, box2, move2, layerthaw2, union1, layerset, layerfreeze2, viewtop)
    return one
sedweirexit_origin = [-0.15; 1.38823; -0.180223] m
Sedtankexitweirscriptperpindicular :=
    layernew1 ← layer_new("sedweirexit", ltgrey)
    viewfront ← viewfront1
    box1 ← box(Plant_Origin, sedweirexit_dim)
    move1 ← move_all(Plant_Origin, sedweirexit_origin)
    layerset ← layer_set("0")
    layerfreeze2 ← layer_freeze("sedweirexit")
    viewtop ← viewtop1
    one ← stack(layernew1, viewfront, box1, move1, layerset, layerset, layerfreeze2, viewtop)
    return one
Sedtankexitweirscript :=
    Sedtankexitweirscriptperpindicular if Geom_ExitChannel == Perpindicular_Weir
    Sedtankexitweirscriptparallel otherwise
Sedtankinletweirscriptparallel :=
    viewright ← viewrightside1
    layerset ← layer_set("0")
    box1 ← box(Plant_Origin, sedweirinlet_dim)
    move1 ← move_all(Plant_Origin, sedweirinlet_origin)
    layernew1 ← layer_new("sedweirinlet", ltgrey)
    layerfreeze ← layer_freeze("0")
    viewfront ← viewfront1
    box2 ← box(Plant_Origin, [W_InletChannelEst + T_SedWeir; H_InletChannel; sedweirinlet_dim[2]])
    move2 ← move_all(Plant_Origin, [-L_Sed; sedweirinlet_origin[1]; T_PlantWall - T_SedWeir])
    viewtop ← viewtop1
    mirror1 ← mirror3d_all([-L_Sed + W_InletChannelEst; L_Channel/2 - T_ChannelWall; Plant_Origin[2]])
    layerthaw2 ← layer_thaw("0")
    union1 ← union_allA
    layerset ← layer_set("0")
    layerfreeze2 ← layer_freeze("sedweirinlet")
    viewtop ← viewtop1
    one ← stack(viewright, layerset, box1, move1, layernew1, layerfreeze, viewfront, box2, move2, viewtop, layerthaw2, union1, layerset, layerfreeze2, viewtop)
    return one
# pipe11_origin | pipe14_origin | pipe6_1ength | pipe7_length | pipe8_length | pipe13_length | pipe14_length
pipe5_1ength
Sedtankinletweirscriptperpindicular :=
    layernew1 ← layer_new("sedweirinlet", ltgrey)
    viewfront ← viewfront1
    box1 ← box(Plant_Origin, sedweirinlet_dim)
    move1 ← move_all(Plant_Origin, sedweirinlet_origin)
    layerset ← layer_set("0")
    layerfreeze2 ← layer_freeze("sedweirinlet")
    viewtop ← viewtop1
    one ← stack(layernew1, viewfront, box1, move1, layerset, layerset, layerfreeze2, viewtop)
    return one
Sedtankinletweirscript :=
    Sedtankinletweirscriptperpindicular if EN_InletChannelGeom == Perpindicular_Weir
    Sedtankinletweirscriptparallel otherwise
# pipe12_origin | pipe13_origin | pipe1_length
Sedtankinletchannelscript :=
    layer2 ← layer_new("channel", ltgrey)
    channel1 ← ChannelDrawing(channel_origin, [W_Sed + 2*T_PlantWall; W_InletChannel; H_InletChannel], T_ChannelWall)
    rotate1 ← rotate(channel_origin, 90)
    box1 ← box(channelinletwall_origin, channelinletwall_origin + channelinletwall_dim)
    bigunion ← union_allA
    box2 ← box(channelinletbox1_origin, channelinletbox1_origin + channelinletbox1_dim)
    subtract2 ← subtractD(Plant_Origin, channelinletbox1_origin)
    box3 ← box(channelinletbox2_origin, channelinletbox2_origin + channelinletbox2_dim)
    subtract3 ← subtractD(Plant_Origin, channelinletbox2_origin)
    a ← ConRadius(vlookup(OD_SedManifoldPipe, Pipesizescoupling, 1)[0])
    c ← vlookup(OD_SedManifoldPipe, Pipesizescoupling, 1)[0]
    viewtops ← viewtop1
    cylinder1 ← cylinderC(iccoupling_origin, a, -SocketDepth(c))
    cylinder2 ← cylinderC([iccoupling_origin[0]; iccoupling_origin[1]; iccoupling_origin[2] - SocketDepth(c)], outerradius(c), -T_ChannelWall + SocketDepth(c))
    union1 ← unionC([iccoupling_origin[0]; iccoupling_origin[1] + a; iccoupling_origin[2]], [iccoupling_origin[0]; iccoupling_origin[1] + outerradius(c); iccoupling_origin[2] - SocketDepth(c)])
    array1 ← arrayB([iccoupling_origin[0]; iccoupling_origin[1] + a; iccoupling_origin[2]], N_SedBays, 1, -W_SedBay)
    union2 ← unionC([
        Plant_Origin[0] - L_Sed + W_InletChannel - 3*zc;
        Plant_Origin[1] - T_PlantWall + 3*zc;
        Plant_Origin[2] + H_Sed - H_InletChannel
    ], [
        Plant_Origin[0] - L_Sed + 3*zc;
        Plant_Origin[1] - T_PlantWall + W_Sed + 3*zc;
        Plant_Origin[2] + H_Sed - H_InletChannel
    ])
    subtract4 ← subtractD(channel_origin, [iccoupling_origin[0]; iccoupling_origin[1] + a; iccoupling_origin[2]])
    layerset ← layer_set("0")
    layerfreeze2 ← layer_freeze("channel")
    one ← stack(layer2, channel1, rotate1, bigunion, viewtops, cylinder1, cylinder2, union1, array1, union2, subtract4, layerset, layerfreeze2)
    return ← one
Z_SedSlopes + H_SedBetween = 0.951389 m
Sedbottomslopeslope_origin = [0.382121; 0.147879; 0] m
W_SedSlope*tan(AN_SedSlope) = 0.618552 m
Z_SedSlopes = 0.766431 m
H_SedSlopeTriangle = 0.618552 m
SedDrainCouplingScript :=
    Local ← layer_new("SedDrainCoupling", green)
    for i ∈ 0 .. N_SedBays - 1
        Local ← stack(Local, CouplingSUBF([-L_Sed - SocketDepth(ND_SedDrainAdapter); W_SedBay*(N_SedBays - i) - 0.5*W_SedBay; Plant_Origin[2]], [0; 0]*deg, ND_SedDrainAdapter, EN_PipeSpec, ["tank"]))
    return stack(Local, FreezeLayer("SedDrainCoupling"))
# Draws on the far side of the tank(left side from top view) viewing from the right side of the tank!
SedDrainPipeScript :=
    Local ← layer_new("SedDrainPipe", blue)
    for i ∈ 0 .. N_SedBays - 1
        Local ← stack(Local, PipeSUBF([
            -L_Sed - CouplingLength(ND_SedDrainAdapter) + SocketDepth(ND_SedDrainAdapter);
            W_SedBay*(N_SedBays - i) - 0.5*W_SedBay;
            Plant_Origin[2]
        ], T_PlantWall + SocketDepth(ND_SedDrainAdapter), [0; 0]*deg, ND_SedDrainAdapter, EN_PipeSpec, ["tank"]))
    return stack(Local, FreezeLayer("SedDrainPipe"))
SedDrainAdapterScript :=
    Local ← layer_new("SedDrainAdapter", green)
    for i ∈ 0 .. N_SedBays - 1
        Local ← stack(Local, MaleAdapterF([
            -L_Sed - T_PlantWall - CouplingLength(ND_SedDrainAdapter);
            W_SedBay*(N_SedBays - i) - 0.5*W_SedBay;
            Plant_Origin[2]
        ], [0; 0]*deg, ND_SedDrainAdapter, EN_PipeSpec))
    return stack(Local, FreezeLayer("SedDrainAdapter"))
SedDrainValveScript :=
    Local ← stack(layer_new("SedDrainValves", blue))
    XCoordinate ←
        (-L_Sed - CouplingLength(ND_SedDrainAdapter) - T_PlantWall) if MaleAdapterLength(ND_SedDrainAdapter) - SocketDepth(ND_SedDrainAdapter) < 0.5*ValveLength(ND_SedDrainAdapter)
        (-L_Sed - CouplingLength(ND_SedDrainAdapter) - T_PlantWall + 0.5*ValveLength(ND_SedDrainAdapter) - MaleAdapterLength(ND_SedDrainAdapter) + SocketDepth(ND_SedDrainAdapter)) otherwise
    Insert ← insertdwg("VAL-Scaled-Gate-Valve-Threaded", [XCoordinate; W_SedBay*N_SedBays - 0.5*W_SedBay; 0 m], D_SedScale, 0)
    ArrayBay ← concat("-array", sp, "ALL", sp, sp, "r", sp, stringit_nounits(N_SedBays), sp, "1", sp, stringit(-W_SedBay))
    Local ←
        stack(Local, Insert, layer_set("0"), FreezeLayer("SedDrainValves")) if N_SedBays == 1
        stack(Local, Insert, ArrayBay, layer_set("0"), FreezeLayer("SedDrainValves")) otherwise
    return Local
Sedbottomslopescript :=
    Layer3 ← layer_new("bottomslopes", ltgrey)
    View ← viewrightside1
    Pline ← Pline([
        [Sedbottomslopeslope_origin[0]; Sedbottomslopeslope_origin[1]];
        [Sedbottomslopeslope_origin[0]; Sedbottomslopeslope_origin[1] - T_SedSludge];
        [Sedbottomslopeslope_origin[0] + T_ConcreteMin; Sedbottomslopeslope_origin[1] - T_SedSludge];
        [
            Sedbottomslopeslope_origin[0] + T_ConcreteMin;
            Sedbottomslopeslope_origin[1] - T_SedSludge - H_SedSludge
        ];
        [
            Sedbottomslopeslope_origin[0] - W_SedInletBottom;
            Sedbottomslopeslope_origin[1] - T_SedSludge - H_SedSludge
        ];
        [Sedbottomslopeslope_origin[0] - W_SedInletBottom; Z_SedSlopes];
        [Sedbottomslopeslope_origin[0] - W_SedInletBottom + T_ConcreteMin/2; Z_SedSlopes];
        [Sedbottomslopeslope_origin[0]; Sedbottomslopeslope_origin[1]]
    ])
    Extrude1 ← extrude([Sedbottomslopeslope_origin[0]; Sedbottomslopeslope_origin[1]], -L_Sed)
    Mirror3d1 ← mirror3dyz(Sedbottomslopeslope_origin, [
        Sedbottomslopeslope_origin[0] + W_SedDrainCover/2;
        Sedbottomslopeslope_origin[1];
        Sedbottomslopeslope_origin[2]
    ])
    UnionAll ← union_allA
    ViewTop ← viewtop1
    ArrayBay1 ← concat("-array", sp, "ALL", sp, sp, "r", sp, stringit_nounits(N_SedBays), sp, "1", sp, stringit(W_SedBay))
    RightLedge ← box([0 m; W_SedBay*N_SedBays - T_ConcreteMin/2; Z_SedSlopes], [-L_Sed; W_SedBay*N_SedBays; Z_SedSlopes + H_SedBetween])
    LeftLedge ← box([0 m; 0 m; Z_SedSlopes], [-L_Sed; T_ConcreteMin/2; Z_SedSlopes + H_SedBetween])
    BigUnion ← union_allA
    LayerFreeze3 ← layer_freeze("bottomslopes")
    LayerSet ← layer_set("0")
    one ← stack(Layer3, View, Pline, View, Extrude1, Mirror3d1, UnionAll, ViewTop, BigUnion, LayerSet, LayerFreeze3) if N_SedBays == 1 and H_SedBetween == 0
    one ← stack(Layer3, View, Pline, View, Extrude1, Mirror3d1, UnionAll, ViewTop, RightLedge, LeftLedge, BigUnion, LayerSet, LayerFreeze3) if N_SedBays == 1 and H_SedBetween > 0
    one ← stack(Layer3, View, Pline, View, Extrude1, Mirror3d1, UnionAll, ViewTop, ArrayBay1, BigUnion, LayerSet, LayerFreeze3) if N_SedBays > 1 and H_SedBetween == 0
    one ← stack(Layer3, View, Pline, View, Extrude1, Mirror3d1, UnionAll, ViewTop, ArrayBay1, RightLedge, LeftLedge, BigUnion, LayerSet, LayerFreeze3) otherwise
    return one
Z_SedSlopes + H_SedBetween = 0.951389 m
# pipe2_origin | pipe3_origin | pipe11_origin | pipe14_origin | pipe6_1ength | pipe7_length | pipe8_length | pipe13_length | pipe14_length
# pipe4_origin | pipe5_origin | pipe8_origin | pipe5_1ength
# pipe6_origin | pipe7_origin | pipe9_origin | pipe10_origin | pipe12_origin | pipe13_origin | pipe1_length
[
    manifoldpipe_origin[2] + SocketDepth(ND_SedManifold) + B_SedManifoldPort/2;
    manifoldpipe_origin[0] - D_SedManifoldPort/2
] = [-12.4723; 1.573] m
influentmanifoldscript :=
    viewtop ← viewtop1
    inletholeslayer ← layer_new("iccoupling", green)
    iccoupling ← couplingIDsocket(iccoupling_origin, OD_SedManifoldPipe, T_ChannelWall, EN_PipeSpec)
    layerset ← layer_set("0")
    layerfreezechimneycoupling ← layer_freeze("iccoupling")
    viewright ← viewrightside1
    manpipelayer ← layer_new("manifoldpipe", blue)
    manpipe ← Pipe(manifoldpipe_origin, ND_SedManifold, L_SedManifoldPipe - ElbowRadius(ND_SedManifold), EN_PipeSpec)
    cap ← cap([
        manifoldpipe_origin[0];
        manifoldpipe_origin[1];
        manifoldpipe_origin[2] + L_SedManifoldPipe - ElbowRadius(ND_SedManifold) - (CapHeight(NominalPipeSize(ND_SedManifold)) - (CapDiameter(NominalPipeSize(ND_SedManifold))/2 - outerradius(NominalPipeSize(ND_SedManifold))))
    ], ND_SedManifold, EN_PipeSpec)
    cylinder3 ← cylinderC([
        manifoldpipe_origin[2] + SocketDepth(ND_SedManifold) + B_SedManifoldPort/2;
        manifoldpipe_origin[0];
        manifoldpipe_origin[1]
    ], D_SedManifoldPort/2, -OD_SedManifoldPipe/2 - zc)
    array1 ← arrayB([
        manifoldpipe_origin[2] + SocketDepth(ND_SedManifold) + B_SedManifoldPort/2 + D_SedManifoldPort/2;
        manifoldpipe_origin[0];
        manifoldpipe_origin[1]
    ], 1, N_SedManifoldPorts, B_SedManifoldPort)
    SubtractOrifices ← subtractDall([manifoldpipe_origin[2]; manifoldpipe_origin[0] - outerradius(ND_SedManifold)])
    freezemanpipe ← layer_freeze("manifoldpipe")
    layermanifoldelbow ← layer_new("manifoldelbow", green)
    elbow ← elbow(manifoldelbow_origin, ND_SedManifold, EN_PipeSpec)
    viewright ← viewrightside1
    rotateelbow ← rotate_All(manifoldpipe_origin, -90)
    mirrorelbow ← mirror_allyes([manifoldelbow_origin[0] + ElbowRadius(ND_SedManifold); manifoldelbow_origin[1]], [manifoldelbow_origin[0] + ElbowRadius(ND_SedManifold); (2*manifoldelbow_origin)[1]])
    moveelbow ← move_all([
        -L_Sed + W_InletChannelEst/2 + ElbowRadius(ND_SedManifold);
        manifoldelbow_origin[1];
        manifoldelbow_origin[2]
    ], [-L_Sed + W_InletChannelEst/2; manifoldelbow_origin[1]; manifoldelbow_origin[2]])
    layerfreezeelbow ← layer_freeze("manifoldelbow")
    layerchimneystops ← layer_new("chimney stops", grey)
    chimneystop ← chimneystop([iccoupling_origin[0]; iccoupling_origin[1]; H_Sed - H_InletChannel - H_SedSludge], ND_SedManifold, HW_InletChannel, 1 in, EN_PipeSpec)
    layerthawcoupling ← layer_thaw("iccoupling")
    layerthawmanifold ← layer_thaw("manifoldpipe")
    layerthawmanifoldelbow ← layer_thaw("manifoldelbow")
    arraybay3 ← concat("-array", sp, "ALL", sp, sp, "r", sp, stringit_nounits(N_SedBays), sp, "1", sp, stringit(-W_SedBay))
    arraybay4 ← concat("-array", sp, "ALL", sp, sp, "r", sp, stringit_nounits(N_SedBays), sp, "1", sp, stringit(-W_SedBay))
    layerset ← layer_set("0")
    layerfreezechimneystops ← layer_freeze("chimney stops")
    one ← stack(viewtop, inletholeslayer, iccoupling, layerset, layerfreezechimneycoupling, viewright, manpipelayer, manpipe, cap, viewtop, cylinder3, array1, SubtractOrifices, layerset, freezemanpipe, viewtop, layermanifoldelbow, elbow, viewright, rotateelbow, viewtop, mirrorelbow, moveelbow, layerset, layerfreezeelbow, layerchimneystops, chimneystop, layerthawcoupling, layerthawmanifold, layerthawmanifoldelbow, layerset, layerfreezechimneycoupling, freezemanpipe, layerfreezeelbow, layerfreezechimneystops) if N_SedBays == 1
    one ← stack(viewtop, inletholeslayer, iccoupling, layerset, viewright, manpipelayer, layerfreezechimneycoupling, manpipe, cap, viewtop, cylinder3, array1, SubtractOrifices, layerset, freezemanpipe, viewtop, layermanifoldelbow, elbow, viewright, rotateelbow, viewtop, mirrorelbow, moveelbow, layerset, layerfreezeelbow, layerchimneystops, chimneystop, layerthawcoupling, layerthawmanifold, layerthawmanifoldelbow, arraybay4, layerset, layerfreezechimneycoupling, freezemanpipe, layerfreezeelbow, layerfreezechimneystops) if (N_SedBays > 1 and N_SedTanks ≥ 1)
    one ← stack(viewtop, inletholeslayer, iccoupling, layerset, viewright, manpipelayer, layerfreezechimneycoupling, manpipe, cap, viewtop, cylinder3, array1, SubtractOrifices, layerset, freezemanpipe, viewtop, layermanifoldelbow, elbow, viewright, rotateelbow, viewtop, mirrorelbow, moveelbow, layerset, layerfreezeelbow, layerchimneystops, chimneystop, layerthawcoupling, layerthawmanifold, layerthawmanifoldelbow, arraybay3, layerset, layerfreezechimneycoupling, freezemanpipe, layerfreezeelbow, layerfreezechimneystops) otherwise
    return one
inletpipescript :=
    layernew ← layer_new("inletpipe", blue)
    viewtop ← viewtop1
    pipe ← Pipe([iccoupling_origin[0]; iccoupling_origin[1]; manifoldelbow_origin[2] + ElbowRadius(ND_SedManifold)], ND_SedManifold, H_Sed - H_InletChannel - T_ChannelWall + SocketDepth(ND_SedManifold) - (manifoldelbow_origin[2] + ElbowRadius(ND_SedManifold)), EN_PipeSpec)
    arraybay3 ← concat("-array", sp, "ALL", sp, sp, "r", sp, stringit_nounits(N_SedBays), sp, "1", sp, stringit(-W_SedBay))
    arraybay4 ← concat("-array", sp, "ALL", sp, sp, "r", sp, stringit_nounits(N_SedBays), sp, "1", sp, stringit(-W_SedBay))
    layerset ← layer_set("0")
    layerfreeze ← layer_freeze("inletpipe")
    one ← stack(layernew, viewtop, pipe, layerset, layerfreeze) if N_SedBays == 1
    one ← stack(layernew, viewtop, pipe, arraybay4, layerset, layerfreeze) if (N_SedBays > 1 and N_SedTanks ≥ 1)
    one ← stack(layernew, viewtop, pipe, arraybay3, layerset, layerfreeze) otherwise
Orificescript :=
    viewtops ← viewtop1
    layer1 ← layer_new("draincover", red)
    cylinder1 ← cylinderC([
        DrainCover_origin[0] + (-L_Sed) + B_SedSludgeOrifices;
        DrainCover_origin[1] + W_SedDrainCover/2;
        DrainCover_origin[2]
    ], D_SedSludgeOrifice/2, T_SedSludge)
    viewtops2 ← viewtop1
    cylinders ← array_all(1, N_SedSludgeOrifices, B_SedSludgeOrifices)
    union1 ← union_allA
    one ← stack(viewtops, layer1, cylinder1, cylinders, union1)
    return one
Draincoverscript :=
    viewtops ← viewtop1
    layerset2 ← layer_set("draincover")
    box1 ← box(DrainCover_origin, [
        DrainCover_origin[0] - L_Sed;
        DrainCover_origin[1] + W_SedDrainCover;
        DrainCover_origin[2] + T_SedSludge
    ])
    holes ← subtractD(DrainCover_origin, [
        DrainCover_origin[0] + (-L_Sed) + B_SedSludgeOrifices - D_SedSludgeOrifice/2;
        DrainCover_origin[1] + W_SedDrainCover/2;
        DrainCover_origin[2]
    ])
    arraybay1 ← concat("-array", sp, "ALL", sp, sp, "r", sp, stringit_nounits(N_SedBays), sp, "1", sp, stringit(W_SedBay))
    arraybay2 ← concat("-array", sp, "ALL", sp, sp, "r", sp, stringit_nounits(N_SedBays), sp, "1", sp, stringit(W_SedBay))
    layerset ← layer_set("0")
    layerfreeze ← layer_freeze("draincover")
    one ← stack(viewtops, layerset2, box1, viewtops, holes, layerset, layerfreeze) if N_SedBays == 1
    one ← stack(viewtops, layerset2, box1, viewtops, holes, arraybay2, layerset, layerfreeze) if N_SedBays > 1 and N_SedTanks ≥ 1
    one ← stack(viewtops, layerset2, box1, viewtops, holes, arraybay1, layerset, layerfreeze) otherwise
    return one
Sedtanklaminascript :=
    layer7 ← layer_new("lamina", purple)
    lamina1 ← laminascript2(lamina_origin, W_SedBay, L_SedPlate, T_SedPlate, AN_SedPlate, N_SedModulePlates, N_SedModules, ND_SedModulePipe, ND_SedModulePipeSpace, S_SedPlateModule, S_SedModulePipes, L_SedModulePipe, N_SedPlateCol, B_SedPlateHorizontal)
    viewright ← viewrightside1
    array2 ← array_all(1, N_SedBays, W_SedBay)
    block1 ← block("laminablock", lamina_origin, lamina_origin)
    layerset1 ← layer_set("0")
    layerfreeze7 ← layer_freeze("lamina")
    one ← stack(layer7, lamina1, viewright, array2, block1, layerset1, layerfreeze7)
    return one
FlocHopperScript :=
    layer1 ← layer_new("flochopper", green)
    viewtop ← viewtop1
    zoomin1 ← zoom_win([FlocHopper_origin[0]; FlocHopper_origin[1]], [50 m; 100 m])
    flochopper_box ← box(FlocHopper_origin, FlocHopperBox_dim)
    flochopper_wedge1 ← wedge(FlocHopper_origin, FlocHopperWedge_dim, H_FlocHopper)
    mirror_wedge ← mirrorD(FlocHopperWedge_dim, [FlocHopper_origin[0] + L_FlocHopper/2; FlocHopper_origin[1]], [FlocHopper_origin[0] + L_FlocHopper/2; T_FlocHopper])
    zoomin2 ← zoom_win([FlocHopper_origin[0]; FlocHopper_origin[1]], [2*FlocHopperBox_dim[0]; 2*FlocHopperBox_dim[1]])
    subtract_wedge1 ← subtractD([FlocHopperBox_dim[0]/2; FlocHopperBox_dim[1]; FlocHopperBox_dim[2]], [FlocHopperWedge_dim[0]; FlocHopperWedge_dim[1]/2; FlocHopper_origin[2]])
    subtract_wedge2 ← subtractD([FlocHopperBox_dim[0]/2; FlocHopperBox_dim[1]], [FlocHopperWedge_dim[0] + W_FlocHopper; FlocHopperWedge_dim[1]/2])
    rotate_flochopper1 ← rotate_3d(FlocHopperBox_dim, FlocHopper_origin, "z", 90)
    rotate_flochopper ← rotate_3d([FlocHopper_origin[0]; FlocHopper_origin[1]; H_FlocHopper], [FlocHopper_origin[0] + T_FlocHopper; FlocHopper_origin[1]; FlocHopper_origin[2]], "y", 90 - AN_FlocHopper)
    move_flochopper ← move_allD([
        -L_Sed + SedInletChimneyOuter_dim[0] + T_FlocHopper;
        W_SedBay*(N_SedBays - 1) + W_SedBayDivider*(N_SedBays - 1);
        SedDrainCover_dim[1]
    ])
    arraybay3 ← concat("-array", sp, "ALL", sp, sp, "r", sp, stringit_nounits(N_SedBays), sp, "1", sp, stringit(-W_SedBay - W_SedBayDivider/2))
    arraybay4 ← concat("-array", sp, "ALL", sp, sp, "r", sp, stringit_nounits(N_SedBays), sp, "1", sp, stringit(-((W_Sed - (N_SedBays - 1)*W_SedBayDivider)/N_SedBays + W_SedBayDivider)))
    layerset ← layer_set("0")
    layerfreeze ← layer_freeze("flochopper")
    one ← stack(layer1, viewtop, zoomin1, flochopper_box, flochopper_wedge1, mirror_wedge, zoomin2, subtract_wedge1, subtract_wedge2, rotate_flochopper1, rotate_flochopper, move_flochopper, layerset, layerfreeze) if N_SedBays == 1
    one ← stack(layer1, viewtop, zoomin1, flochopper_box, flochopper_wedge1, mirror_wedge, zoomin2, subtract_wedge1, subtract_wedge2, rotate_flochopper1, rotate_flochopper, move_flochopper, arraybay4, layerset, layerfreeze) if N_SedBays > 1 and N_SedTanks ≥ 1
    one ← stack(layer1, viewtop, zoomin1, flochopper_box, flochopper_wedge1, mirror_wedge, zoomin2, subtract_wedge1, subtract_wedge2, rotate_flochopper1, rotate_flochopper, move_flochopper, arraybay3, layerset, layerfreeze) otherwise
    return one  # error: This variable is undefined.
Pipeframescript :=
    Layer1 ← layer_new("pipeframe", yellow)
    View1 ← viewfront1
    HorizontalCylinder ← cylinderC(pipeframe_origin, outerradius(ND_SedPlateFrame), -W_SedBay)
    View2 ← viewtop1
    Array1 ← array_all(1, 3, L_SedActive/2)
    View3 ← viewrightside1
    VerticalCylinder ← cylinderC([B_SedPlateFrameVertical; pipeframe_origin[1]; pipeframe_origin[0]], outerradius(ND_SedPlateFrame), L_Sed - W_InletChannel - L_SedPlate*cos(AN_SedPlate) - T_ChannelWall + 2*zc)
    MirrorCylinder ← mirror_all([0; W_SedBay/2], [L_Sed - W_InletChannel - W_ExitChannel - 2*T_ChannelWall; W_SedBay/2])
    Stub ← cylinderC([pipeframe_origin[0]; B_SedPlateFrameVertical; pipeframe_origin[1] + outerradius(ND_SedPlateFrame)], outerradius(ND_SedFrameStub), H_SedFrameStub)
    ArrayStub ← array2D([
        pipeframe_origin[0] - outerradius(ND_SedFrameStub)/2;
        B_SedPlateFrameVertical + outerradius(ND_SedFrameStub);
        pipeframe_origin[1]
    ], [
        pipeframe_origin[0] + outerradius(ND_SedFrameStub)/2;
        B_SedPlateFrameVertical - outerradius(ND_SedFrameStub);
        pipeframe_origin[1]
    ], 2, N_SedModules + 1, W_SedBay - 2*B_SedPlateFrameVertical, B_SedFrameStub)
    Union1 ← union_allA
    ArrayBay ← array_all(N_SedBays, 1, W_SedBay)
    ArrayHolder ← array2D([pipeframe_origin[0] - D_Flange; pipeframe_origin[2] + W_SedBay + D_Flange; pipeframe_origin[1]], [pipeframe_origin[0] + D_Flange; pipeframe_origin[2] + W_SedBay - D_Flange; pipeframe_origin[1]], N_SedBays - 1, 3, L_SedActive/2, W_SedBay)
    LayerSet0 ← layer_set("0")
    LayerFreeze0 ← layer_freeze("pipeframe")
    LayerNew ← layer_new("PipeFrame Support", yellow)
    LayerSet1 ← layer_set("PipeFrame Support")
    Flange ← cylinderC([
        pipeframe_origin[0];
        pipeframe_origin[2] + W_SedBay;
        pipeframe_origin[1] - outerdiameter(ND_SedPlateFrame)/2
    ], D_Flange/2, T_Flange)
    SupportPipe ← cylinderD([
        pipeframe_origin[0];
        pipeframe_origin[2] + W_SedBay;
        pipeframe_origin[1] - outerdiameter(ND_SedPlateFrame)/2 + T_Flange
    ], outerradius(ND_SedPlateFrame), [pipeframe_origin[0]; pipeframe_origin[2] + W_SedBay; Z_SedSlopes])
    Array2 ← array_all(1, 3, L_SedActive/2)
    Array3 ← array_all(N_SedBays - 1, 1, W_SedBay)
    LayerFreeze1 ← layer_freeze("PipeFrame Support")
    one ←
        stack(Layer1, View1, HorizontalCylinder, View2, Array1, View3, VerticalCylinder, View2, MirrorCylinder, Stub, ArrayStub, Union1, ArrayBay, ArrayHolder, LayerSet0, LayerFreeze0) if (H_SedBetween == 0 and N_SedBays > 1)
        stack(Layer1, View1, HorizontalCylinder, View2, Array1, View3, VerticalCylinder, View2, MirrorCylinder, Stub, ArrayStub, Union1, LayerSet0, LayerFreeze0) if (N_SedBays == 1)
        stack(Layer1, View1, HorizontalCylinder, View2, Array1, View3, VerticalCylinder, View2, MirrorCylinder, Stub, ArrayStub, Union1, ArrayBay, ArrayHolder, LayerSet0, LayerFreeze0, LayerNew, LayerSet1, Flange, SupportPipe, Array2, Array3, LayerSet0, LayerFreeze1) otherwise
SedLaunderScriptNEW :=
    LayerNew1 ← layer_new("launder", pastelgreen)
    LaunderPipe ← PipeF(SedLaunderNew_origin, L_SedLaunder, [0 deg; 0 deg], ND_SedLaunder, EN_PipeSpec)
    FreezeLaunder ← FreezeLayer("launder")
    Orifice ← cylinderD([
        SedLaunderNew_origin[0];
        SedLaunderNew_origin[1];
        SedLaunderNew_origin[2] + L_SedActive - B_SedLaunderOrifices/2
    ], D_SedLaunderOrifice/2, [
        SedLaunderNew_origin[0];
        SedLaunderNew_origin[1] + outerradius(ND_SedLaunder) + zc;
        SedLaunderNew_origin[2] + L_SedActive - B_SedLaunderOrifices/2
    ])
    ViewRightSide ← viewrightside1
    OrificeArray ← arrayB([
        SedLaunderNew_origin[1] + outerradius(ND_SedLaunder) + zc;
        SedLaunderNew_origin[2] + L_SedActive - B_SedLaunderOrifices/2;
        SedLaunderNew_origin[0]
    ], N_SedLaunderOrificesRow, 1, -B_SedLaunderOrifices)
    ThawLaunder ← SelectLayer("launder")
    FreezeLaunderAgain ← FreezeLayer("launder")
    SubtractOrifice ← subtractH([SedLaunderNew_origin[0]; SedLaunderNew_origin[1] - outerradius(ND_SedLaunder)], [
        SedLaunderNew_origin[0] + D_SedLaunderOrifice + zc;
        SedLaunderNew_origin[1] + outerradius(ND_SedLaunder) + 2*zc
    ], [SedLaunderNew_origin[0] - D_SedLaunderOrifice - zc; SedLaunderNew_origin[1] - zc])
    LayerNew2 ← layer_new("PVCCoupling", turquoise)
    PVCCoupling ← CouplingSUBF(PVCCouplingNew_origin, [0 deg; 0 deg], ND_SedLaunder, EN_PipeSpec, ["tank"])
    FreezePVCCoupling ← FreezeLayer("PVCCoupling")
    LayerNew3 ← layer_new("SedLaunderNipple", red)
    SedLaunderNipple ←
        PipeF(SedLaunderNippleNew_origin, LengthSedLaunderNipple, [0 deg; 0 deg], ND_SedLaunder, EN_PipeSpec) if CouplingLength(ND_SedLaunder) ≥ T_ChannelWall
        PipeSUBF(SedLaunderNippleNew_origin, LengthSedLaunderNipple, [0 deg; 0 deg], ND_SedLaunder, EN_PipeSpec, ["tank"]) otherwise
    FreezeSedLaunderNipple ← FreezeLayer("SedLaunderNipple")
    LayerNew4 ← layer_new("FlexCoupling", pastelyellow)
    FlexCoupling ← FlexCouplingF(FlexCouplingNew_origin, [0 deg; 0 deg], ND_SedLaunder)
    FreezeFlexCoupling ← FreezeLayer("FlexCoupling")
    LayerNew5 ← layer_new("LaunderCap", pink)
    LaunderCap ← CapF(LaunderCapNew_origin, [0 deg; 180 deg], ND_SedLaunder)
    FreezeLaunderCap ← FreezeLayer("LaunderCap")
    StackEverything ← stack(LayerNew1, LaunderPipe, FreezeLaunder, LayerNew2, PVCCoupling, FreezePVCCoupling, LayerNew3, SedLaunderNipple, FreezeSedLaunderNipple, LayerNew4, FlexCoupling, FreezeFlexCoupling, LayerNew5, LaunderCap, FreezeLaunderCap)
    return StackEverything
SedLaunderscript :=
    layernew1 ← layer_new("launder", blue)
    viewtop1 ← viewtop1
    win1 ← [
        SedLaunder_origin[0] - outerradius(ND_SedLaunder) - zc;
        SedLaunder_origin[1] - outerradius(ND_SedLaunder) - zc;
        SedLaunder_origin[2]
    ]
    win2 ← [
        (SedLaunder_origin[0] + outerradius(ND_SedLaunder)) + zc;
        SedLaunder_origin[1] + outerradius(ND_SedLaunder) + zc;
        SedLaunder_origin[2]
    ]
    zoom_win ← zoom_win(win1, win2)
    pipe1 ← Pipe(SedLaunder_origin, ND_SedLaunder, L_SedLaunder, EN_PipeSpec)
    cylinder3 ← cylinderD([
        SedLaunder_origin[0];
        SedLaunder_origin[1];
        SedLaunder_origin[2] + L_SedActive - B_SedLaunderOrifices/2
    ], D_SedLaunderOrifice/2, [
        SedLaunder_origin[0];
        SedLaunder_origin[1] + outerradius(ND_SedLaunder) + zc;
        SedLaunder_origin[2] + L_SedActive - B_SedLaunderOrifices/2
    ])
    viewrightside1 ← viewrightside1
    array1 ← arrayB([
        SedLaunder_origin[1] + outerradius(ND_SedLaunder) + zc;
        SedLaunder_origin[2] + L_SedActive - B_SedLaunderOrifices/2;
        SedLaunder_origin[0]
    ], N_SedLaunderOrificesRow, 1, -B_SedLaunderOrifices)
    subtract2 ← subtractH([SedLaunder_origin[0]; SedLaunder_origin[1] - outerradius(ND_SedLaunder)], [
        SedLaunder_origin[0] + D_SedLaunderOrifice + zc;
        SedLaunder_origin[1] + outerradius(ND_SedLaunder) + 2*zc
    ], [SedLaunder_origin[0] - D_SedLaunderOrifice - zc; SedLaunder_origin[1] - zc])
    cylinder4 ← cylinderD([
        SedLaunder_origin[0];
        SedLaunder_origin[1];
        SedLaunder_origin[2] + L_SedActive - B_SedLaunderOrifices/2
    ], D_SedLaunderOrifice/2, [
        SedLaunder_origin[0] + (outerradius(ND_SedLaunder)*cos(π/6)) + outerradius(ND_SedLaunder);
        SedLaunder_origin[1] + (outerradius(ND_SedLaunder)*sin(π/6)) + outerradius(ND_SedLaunder);
        SedLaunder_origin[2] + L_SedActive - B_SedLaunderOrifices/2
    ])
    array2 ← arrayB([
        SedLaunder_origin[1] + (outerradius(ND_SedLaunder)*sin(π/6)) + outerradius(ND_SedLaunder);
        SedLaunder_origin[2] + L_SedActive - B_SedLaunderOrifices/2
    ], N_SedLaunderOrificesRow, 1, -B_SedLaunderOrifices)
    holecylinder ← cylinderD(SedLaunder_origin, ND_SedLaunder, [SedLaunder_origin[0]; SedLaunder_origin[1]; SedLaunder_origin[2] + L_SedLaunder])
    subtract3 ← subtractH([SedLaunder_origin[0]; SedLaunder_origin[1] - outerradius(ND_SedLaunder)], [
        SedLaunder_origin[0] + (outerradius(ND_SedLaunder)*cos(π/3)) + 2*zc;
        SedLaunder_origin[0] + (outerradius(ND_SedLaunder)*sin(π/3)) + 2*zc
    ], [SedLaunder_origin[0]; SedLaunder_origin[1]])
    rotate1 ← rotate18 ← rotate_3d([
        SedLaunder_origin[0] + innerD(ND_SedLaunder, EN_PipeSpec)/2;
        SedLaunder_origin[1];
        SedLaunder_origin[2]
    ], SedLaunder_origin, "y", 90)
    rotate2 ← rotate_3d([
        SedLaunder_origin[0];
        SedLaunder_origin[1] + innerD(ND_SedLaunder, EN_PipeSpec)/2;
        SedLaunder_origin[2]
    ], SedLaunder_origin, "x", 120)
    layerset1 ← layer_set("0")
    view2 ← viewrightside1
    layerfreeze1 ← layer_freeze("launder")
    layercoupling ← layer_new("launder coupling", grey)
    coupling ← couplingIDsocket([SedLaunder_origin[1]; Plant_Origin[1] + Z_SedLaunder; Plant_Origin[2] - W_ExitChannel], outerdiameter(ND_SedLaunder), T_ChannelWall, EN_PipeSpec)
    view2 ← viewrightside1
    layerset1 ← layer_set("0")
    layerfreezecoupl ← layer_freeze("launder coupling")
    layernewcouplcap ← layer_new("laundercouplingcap", red)
    solidcap ← laundercouplingcap([
        SedLaunder_origin[1];
        Plant_Origin[1] + Z_SedLaunder;
        Plant_Origin[2] - W_ExitChannel - SocketDepth(ND_SedLaunder)
    ], ND_SedLaunder, EN_PipeSpec)
    layerset1 ← layer_set("0")
    layerfcouplcap ← layer_freeze("laundercouplingcap")
    layernewocap ← layer_new("launderorificecap", green)
    view3 ← viewleftside
    orificecap ← launderorificecap([
        (Plant_Origin[1] - W_Sed/(N_SedLaunders*N_SedBays*2));
        Plant_Origin[1] + Z_SedLaunder;
        Plant_Origin[2] + W_ExitChannel + T_PlantWall - SocketDepth(ND_SedLaunder)
    ], ND_SedLaunder, D_CapOrifice, EN_PipeSpec)
    layerset1 ← layer_set("0")
    layerfocap ← layer_freeze("launderorificecap")
    layerlaundercap ← layer_new("launder cap", yellow)
    laundercap ← cap([
        Plant_Origin[1] - W_Sed/(N_SedLaunders*N_SedBays*2);
        Plant_Origin[1] + Z_SedLaunder;
        ((Plant_Origin[2] + W_ExitChannel) + T_ChannelWall) + (L_SedLaunder - CapHeight(ND_SedLaunder)) - SocketDepth(ND_SedLaunder) + CapDiameter(NominalPipeSize(ND_SedLaunder))/2 - outerradius(NominalPipeSize(ND_SedLaunder))
    ], ND_SedLaunder, EN_PipeSpec)
    layerthawcoupling ← layer_thaw("launder coupling")
    layerthawlaunder ← layer_thaw("launder")
    layertocap ← layer_thaw("launderorificecap")
    layertcouplcap ← layer_thaw("laundercouplingcap")
    view2 ← viewrightside1
    arraywithinbay ← array_all(1, N_SedLaunders*N_SedBays, (2*SedLaunder_origin)[1])
    arraybay4 ← concat("-array", sp, "ALL", sp, sp, "r", sp, stringit_nounits(N_SedBays), sp, "1", sp, stringit(W_SedBay))
    arraybay2 ← concat("-array", sp, "ALL", sp, sp, "r", sp, stringit_nounits(N_SedBays), sp, "1", sp, stringit(W_SedBay))
    layerset1 ← layer_set("0")
    layerfreeze1 ← layer_freeze("launder")
    layerfreezecoupl ← layer_freeze("launder coupling")
    layerfreezecap ← layer_freeze("launder cap")
    layerfocap ← layer_freeze("launderorificecap")
    layerfcouplecap ← layer_freeze("laundercouplingcap")
    one ← stack(layernew1, viewtop1, zoom_win, pipe1, cylinder3, viewrightside1, array1, viewtop1, subtract2, viewtop1, zoom_win, cylinder4, viewrightside1, array2, viewtop1, subtract3, rotate1, rotate2, layerset1, view2, layerfreeze1, layercoupling, coupling, view2, layerset1, layerfreezecoupl, layernewcouplcap, solidcap, layerset1, layerfcouplcap, layernewocap, view3, orificecap, layerset1, layerfocap, layerlaundercap, view3, laundercap, layerthawcoupling, layerthawlaunder, layertocap, layertcouplcap, view2, arraywithinbay, layerset1, layerfreeze1, layerfreezecoupl, layerfreezecap, layerfocap, layerfcouplcap) if (N_SedTanks > 1 and N_SedBays > 1)
    one ← stack(layernew1, viewtop1, zoom_win, pipe1, cylinder3, viewrightside1, array1, viewtop1, subtract2, viewtop1, zoom_win, cylinder4, viewrightside1, array2, viewtop1, subtract3, rotate1, rotate2, layerset1, view2, layerfreeze1, layercoupling, coupling, view2, layerset1, layerfreezecoupl, layernewcouplcap, solidcap, layerset1, layerfcouplcap, layernewocap, view3, orificecap, layerset1, layerfocap, layerlaundercap, view3, laundercap, layerthawcoupling, layerthawlaunder, layertocap, layertcouplcap, view2, arraywithinbay, layerset1, layerfreeze1, layerfreezecoupl, layerfreezecap, layerfocap, layerfcouplcap) if N_SedBays == 1
    one ← stack(layernew1, viewtop1, zoom_win, pipe1, cylinder3, viewrightside1, array1, viewtop1, subtract2, viewtop1, zoom_win, cylinder4, viewrightside1, array2, viewtop1, subtract3, rotate1, rotate2, layerset1, layerfreeze1, view2, layerfreeze1, layercoupling, coupling, view2, layerset1, layerfreezecoupl, layernewcouplcap, solidcap, layerset1, layerfcouplcap, layernewocap, view3, orificecap, layerset1, layerfocap, layerlaundercap, view3, laundercap, layerthawcoupling, layerthawlaunder, layertocap, layertcouplcap, layerset1, layerfreeze1, layerfreezecoupl, layerfreezecap, layerfocap, layerfcouplcap) otherwise
    return one
    = [
        "-layer m launder";
        "c t 0,255,255";
        "launder";
        "  ";
        "_-view o t";
        "_zoom w -12.41786,0.41046,1.59518 -12.17878,0.64954,1.59518";
        "_zoom w -12.41786,0.41046,1.59518 -12.17878,0.64954,1.59518 _cylinder -12.29832,0.53,1.59518 0.10954 11.6257 _cylinder -12.29832,0.53,1.59518 0.1006 11.6257 _subtract -12.18878,0.53,1.59518  -12.19772,0.53,1.59518 ";
        "_cylinder -12.29832,0.53,13.19444 0.0055 c -12.29832,0.64954,13.19444";
        "_-view o r";
        "-array 0.64954,13.19444,-12.29832  R 109 1 -0.10691"
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    ]
launderholes :=
    layernew1 ← layer_new("launderholes", blue)
    viewright ← viewrightside1
    cylinder1 ← cylinderD([SedLaunder_origin[1]; SedLaunder_origin[2]; -W_ExitChannel + zc], ND_SedLaunder/2, [SedLaunder_origin[1]; SedLaunder_origin[2]; -W_ExitChannel - T_ChannelWall - zc])
    arraywithinbay ← array_all(N_SedLaunders*N_SedBays, 1, (2*SedLaunder_origin)[1])
    arraybay2 ← concat("-array", sp, "ALL", sp, sp, "r", sp, stringit_nounits(N_SedBays), sp, "1", sp, stringit(W_SedBay))
    arraybay4 ← concat("-array", sp, "ALL", sp, sp, "r", sp, stringit_nounits(N_SedBays), sp, "1", sp, stringit(W_SedBay + T_PlantWall))
    layerthaw1 ← layer_thaw("echannel")
    subtract1 ← subtractDall(echannel_origin)
    viewtop ← viewtop1
    layerset1 ← layer_set("0")
    layerfreezelaunderholes ← layer_freeze("launderholes")
    layerfreezeechannel ← layer_freeze("echannel")
    one ← stack(layernew1, viewright, cylinder1, viewtop, arraywithinbay, layerthaw1, viewtop1, subtract1, layerset1, layerfreezelaunderholes, layerfreezeechannel)
Sedtankarrayscript :=
    layerthaw1 ← layer_thaw("tank")
    layerthaw2 ← layer_thaw("channel")
    layerthaw2e ← layer_thaw("echannel")
    layerthaw3 ← layer_thaw("bottomslopes")
    layerthaw4 ← layer_thaw("iccoupling")
    layerthaw5 ← layer_thaw("draincover")
    layerthaw6 ← layer_thaw("slopes")
    layerthaw8 ← layer_thaw("lamina")
    layerthaw9 ← layer_thaw("flochopper")
    layerthaw10 ← layer_thaw("pipeframe")
    layerthaw11 ← layer_thaw("launder")
    layerthaw12 ← layer_thaw("chimneycoupling")
    layerthaw13 ← layer_thaw("chimney stops")
    layerthaw14 ← layer_thaw("manifoldpipe")
    layerthaw15 ← layer_thaw("manifoldelbow")
    layerthaw16 ← layer_thaw("inletpipe")
    layerthaw17 ← layer_thaw("launder coupling")
    layerthaw18 ← layer_thaw("launder cap")
    layerthaw19 ← layer_thaw("SedDrainAdapter")
    layerthaw20 ← layer_thaw("SedDrainValves")
    layerthaw21 ← layer_thaw("launderorificecap")
    layerthaw22 ← layer_thaw("laundercouplingcap")
    layerthaw23 ← layer_thaw("PipeFrame Support")
    layerthaw24 ← layer_thaw("SedDrainPipe")
    layerthaw25 ← layer_thaw("SedDrainCoupling")
    viewtop ← viewtop1
    arraytank1 ← concat("-array", sp, "ALL", sp, sp, "r", sp, stringit_nounits(N_SedTanks), sp, "1", sp, stringit(W_Sed + T_PlantWall))
    layerfreeze13 ← layer_freeze("tank")
    layerfreeze14 ← layer_freeze("channel")
    layerfreeze15 ← layer_freeze("echannel")
    layerfreeze16 ← layer_freeze("bottomslopes")
    layerfreeze17 ← layer_freeze("iccoupling")
    layerfreeze18 ← layer_freeze("draincover")
    layerfreeze19 ← layer_freeze("slopes")
    layerfreeze21 ← layer_freeze("lamina")
    layerfreeze22 ← layer_freeze("flochopper")
    layerfreeze23 ← layer_freeze("pipeframe")
    layerfreeze24 ← layer_freeze("launder")
    layerfreeze25 ← layer_freeze("chimneycoupling")
    layerfreeze26 ← layer_freeze("chimney stops")
    layerfreeze27 ← layer_freeze("manifoldpipe")
    layerfreeze28 ← layer_freeze("manifoldelbow")
    layerfreeze29 ← layer_freeze("inletpipe")
    layerfreeze30 ← layer_freeze("launder coupling")
    layerfreeze31 ← layer_freeze("launder cap")
    layerfreeze32 ← layer_freeze("SedDrainAdapter")
    layerfreeze33 ← layer_freeze("SedDrainValves")
    layerfreeze34 ← layer_freeze("launderorificecap")
    layerfreeze35 ← layer_freeze("laundercouplingcap")
    layerfreeze36 ← layer_freeze("PipeFrame Support")
    layerfreeze37 ← layer_freeze("SedDrainPipe")
    layerfreeze38 ← layer_freeze("SedDrainCoupling")
    bigunion ← union_allA
    layerset ← layer_set("0")
    one ←
        stack(layerthaw1, layerthaw2, layerthaw2e, layerthaw3, layerthaw4, layerthaw5, layerthaw6, layerthaw8, layerthaw9, layerthaw10, layerthaw11, layerthaw12, layerthaw13, layerthaw14, layerthaw15, layerthaw16, layerthaw17, layerthaw18, layerthaw19, layerthaw20, layerthaw21, layerthaw22, layerthaw23, layerthaw24, layerthaw25) if N_SedBays > 0
        stack(layerthaw1, layerthaw2, layerthaw2e, layerthaw3, layerthaw4, layerthaw5, layerthaw6, layerthaw8, layerthaw9, layerthaw10, layerthaw11, layerthaw12, layerthaw13, layerthaw14, layerthaw15, layerthaw16, layerthaw17, layerthaw18, layerthaw19, layerthaw20, layerthaw21, layerthaw22, layerthaw24, layerthaw25) otherwise
    two ← stack(viewtop, arraytank1)
    three ←
        stack(layerfreeze13, layerfreeze14, layerfreeze15, layerfreeze16, layerfreeze17, layerfreeze18, layerfreeze19, layerfreeze21, layerfreeze22, layerfreeze23, layerfreeze24, layerfreeze25, layerfreeze26, layerfreeze27, layerfreeze28, layerfreeze29, layerfreeze30, layerfreeze31, layerfreeze32, layerfreeze33, layerfreeze34, layerfreeze35, layerfreeze36, layerfreeze37, layerfreeze38, bigunion, layerset, layerthaw2, bigunion, layerset, layerfreeze14, layerthaw2e, bigunion, layerset, layerfreeze15) if N_SedBays > 0
        stack(layerfreeze13, layerfreeze14, layerfreeze15, layerfreeze16, layerfreeze17, layerfreeze18, layerfreeze19, layerfreeze21, layerfreeze22, layerfreeze23, layerfreeze24, layerfreeze25, layerfreeze26, layerfreeze27, layerfreeze28, layerfreeze29, layerfreeze30, layerfreeze31, layerfreeze32, layerfreeze33, layerfreeze34, layerfreeze35, layerfreeze37, layerfreeze38, bigunion, layerset, layerthaw2, bigunion, layerset, layerfreeze14, layerthaw2e, bigunion, layerset, layerfreeze15) otherwise
    return stack(one, two, three)
Sedtankopenchannelscript :=
    layerthawtank ← layer_thaw("tank")
    layerthawchannel ← layer_thaw("channel")
    viewtop1 ← viewtop1
    union ← union_allA
    box1 ← box(channelbox_origin, [
        channelbox_origin[0] + channelbox_dim[0];
        channelbox_origin[1] + channelbox_dim[1];
        channelbox_origin[2] + channelbox_dim[2]
    ])
    subtract1 ← subtractD(Plant_Origin, channelbox_origin)
    layerthawechannel ← layer_thaw("echannel")
    box2 ← box(echannelbox_origin, [
        echannelbox_origin[0] + echannelbox_dim[0];
        echannelbox_origin[1] + echannelbox_dim[1];
        echannelbox_origin[2] + echannelbox_dim[2]
    ])
    subtract2 ← subtractD(echannel_origin + [-W_ExitChannel - T_PlantWall; W_Sed/2 + T_PlantWall; T_PlantWall], echannelbox_origin)
    layerset ← layer_set("0")
    layerfreezetank ← layer_freeze("tank")
    layerthawchannel ← layer_freeze("channel")
    layerfreezeechannel ← layer_freeze("echannel")
    one ←
        stack(layerthawtank, layerthawchannel, viewtop1, box1, subtract1, layerthawechannel, box2, subtract2, layerset, layerfreezetank, layerthawchannel, layerfreezeechannel) if N_SedTanks == 1
        stack(layerthawtank, layerthawchannel, viewtop1, union, box1, subtract1, layerthawechannel, box2, subtract2, layerset, layerfreezetank, layerthawchannel, layerfreezeechannel) otherwise
    return one
sedtankconnectingpipe_origin :=
    if sedlayout == 2
        origin ← [
            Plant_Origin[0] - SocketDepth(ND_PltWeir) - 2*ElbowRadius(ND_PltWeir);
            Plant_Origin[1] - T_PlantWall - S_Elbow - ConRadius(ND_PltWeir);
            Plant_Origin[2]
        ]
    return ← origin
sedechanneltankscript :=
    viewtope ← viewtop1
    layernewect ← layer_new("echanneltank", ltgrey)
    tankect ← Tank(echanneltank_origin, echanneltank_dim, T_PlantWall)
    boxect ← box(echannelbox_origin, echannelbox_origin + echannelbox_dim)
    subtractect ← subtractD(echanneltank_origin, echannelbox_origin)
    layerset ← layer_set("0")
    layerfreezeect ← layer_freeze("echanneltank")
    layernewewe ← layer_new("exitweirelbow", green)
    elbowewe ← elbow(sedtankexitweirelbow_origin, ND_PltWeir, EN_PipeSpec)
    rotateewe1 ← rotate_3d([
        sedtankexitweirelbow_origin[0] + ElbowRadius(ND_PltWeir);
        sedtankexitweirelbow_origin[1];
        sedtankexitweirelbow_origin[2] - outerradius(ND_PltWeir)
    ], sedtankexitweirelbow_origin, "y", 90)
    rotateewe2 ← rotate_3d([
        sedtankexitweirelbow_origin[0];
        sedtankexitweirelbow_origin[1] + ElbowRadius(ND_PltWeir) - outerradius(ND_PltWeir);
        sedtankexitweirelbow_origin[2]
    ], sedtankexitweirelbow_origin, "z", 270)
    elbowewe2 ← elbow(sedtankexitweirelbow2_origin, ND_PltWeir, EN_PipeSpec)
    rotateewe21 ← rotate_3d([
        sedtankexitweirelbow2_origin[0] + ElbowRadius(ND_PltWeir);
        sedtankexitweirelbow2_origin[1];
        sedtankexitweirelbow2_origin[2] - outerradius(ND_PltWeir)
    ], sedtankexitweirelbow2_origin, "y", 90)
    rotateewe22 ← rotate_3d([
        sedtankexitweirelbow2_origin[0];
        sedtankexitweirelbow2_origin[1] + ElbowRadius(ND_PltWeir) - outerradius(ND_PltWeir);
        sedtankexitweirelbow2_origin[2]
    ], sedtankexitweirelbow2_origin, "z", 90)
    layerfreezeewe ← layer_freeze("exitweirelbow")
    layernewewp ← layer_new("exitweir", blue)
    pipeewp ← Pipe(exitweirpipe_origin, ND_PltWeir, exitweirpipe_length, EN_PipeSpec)
    copyewp ← copyB(exitweirpipecopy1_point, exitweirpipecopy1_point, exitweirpipecopy2_point)
    layerfreezeewp ← layer_freeze("exitweir")
    layernewconnpipe ← layer_new("connecting pipe", blue)
    pipecon ← Pipe(sedtankconnectingpipe_origin, ND_PltWeir, connectingpipe_length, EN_PipeSpec)
    rotatepipecon ← rotate_3d([
        sedtankconnectingpipe_origin[0] + outerradius(ND_PltWeir);
        sedtankconnectingpipe_origin[1];
        sedtankconnectingpipe_origin[2] + connectingpipe_length
    ], sedtankconnectingpipe_origin, "y", 270)
    layerfreezepipecon ← layer_freeze("connecting pipe")
    one ← stack(viewtope, layernewect, tankect, boxect, subtractect, layerset, layerfreezeect, layernewewe, elbowewe, rotateewe1, rotateewe2, elbowewe2, rotateewe21, rotateewe22, layerset, layerfreezeewe, layernewewp, pipeewp, copyewp, layerset, layerfreezeewp, layernewconnpipe, pipecon, rotatepipecon, layerset, layerfreezepipecon)
    return one
sedichanneltankscript :=
    viewtopi ← viewtop1
    layernewict ← layer_new("ichanneltank", ltgrey)
    tankict ← Tank(ichanneltank_origin, ichanneltank_dim, T_PlantWall)
    boxict ← box(channelbox_origin, channelbox_origin + channelbox_dim)
    subtractict ← subtractD(ichanneltank_origin, channelbox_origin)
    layerset ← layer_set("0")
    layerfreezeict ← layer_freeze("ichanneltank")
    layernewiwe ← layer_new("inletweirtee", green)
    teeiwt ← Tee2(sedtankinletweirelbow_origin, ND_PltWeir, EN_PipeSpec)
    rotateiwe1 ← rotate_3dAll([
        sedtankinletweirelbow_origin[0];
        sedtankinletweirelbow_origin[2] + ShortTeeLength(ND_PltWeir);
        sedtankinletweirelbow_origin[1]
    ], "z", 0)
    layernewiwp ← layer_new("inletweir", blue)
    pipeiwp ← Pipe(inletweirpipe_origin, ND_PltWeir, inletweirpipe_length, EN_PipeSpec)
    layerfreezeiwp ← layer_freeze("inletweir")
    layerfreezeiwt ← layer_freeze("inletweirtee")
    NewWastePipe ← layer_new("WastePipe", blue)
    WastePipe ← PipeF([
        sedtankinletweirelbow_origin[0] - ShortTeeLength(ND_PltWeir);
        sedtankinletweirelbow_origin[1];
        Plant_Origin[2]
    ], 1.25*ND_PltWeir, [0; 0]*deg, ND_PltWeir, EN_PipeSpec)
    FreezeWastePipe ← FreezeLayer("WastePipe")
    NewWasteElbow ← layer_new("WasteElbow", green)
    WasteElbow ← ElbowF([
        sedtankinletweirelbow_origin[0] - 1.25*ND_PltWeir - ShortTeeLength(ND_PltWeir);
        sedtankinletweirelbow_origin[1];
        Plant_Origin[2]
    ], [90; 0; 45]*deg, ND_PltWeir, EN_PipeSpec)
    FreezeWasteElbow ← FreezeLayer("WasteElbow")
    return stack(viewtopi, layernewict, tankict, boxict, subtractict, layerset, layerfreezeict, layernewiwe, teeiwt, rotateiwe1, layerset, viewtopi, layernewiwp, pipeiwp, layerset, layerfreezeiwp, layerfreezeiwt, NewWastePipe, WastePipe, FreezeWastePipe, NewWasteElbow, WasteElbow, FreezeWasteElbow)
weirpipescapsscript :=
    viewtops ← viewtop1
    layerweircaps ← layer_new("weirpipecap", dkgrey)
    iweircap ← cap(inletweirpipe_origin + [0; 0; inletweirpipe_length], ND_PltWeir, EN_PipeSpec)
    eweircap1 ← cap(exitweirpipe_origin + [0; 0; exitweirpipe_length], ND_PltWeir, EN_PipeSpec)
    eweircap2 ← cap(exitweirpipecopy2_point + [innerD(ND_PltWeir, EN_PipeSpec)/2; 0; exitweirpipe_length], ND_PltWeir, EN_PipeSpec)
    layerset0 ← layer_set("0")
    layerfreezecaps ← layer_freeze("weirpipecap")
    one ← stack(viewtops, layerweircaps, iweircap, eweircap1, viewtops, eweircap2, layerset0, layerfreezecaps)
    return one
text := stack(stack(concat("-layer", sp, "m", sp, "text"), concat("c", sp, "c", sp, point_nounits([0; 0; 0][:, 0])), concat("text"), concat(sp, sp)), textbox(H_Text, textbox_origin, textbox_origin + textbox_dim, Disclaimer), layer_freeze("text"))
AC_SedTank :=
    stack(Sedtanktankscript, Sedtanksubtractchannelscript, Sedtankexitchannelscript, Sedtankexitweirscript, Sedtankinletweirscript, Sedtankinletchannelscript, SedDrainCouplingScript, SedDrainPipeScript, SedDrainAdapterScript, SedDrainValveScript, Sedbottomslopescript, influentmanifoldscript, inletpipescript, Orificescript, Draincoverscript, Sedtanklaminascript, Pipeframescript, SedLaunderScriptNEW, launderholes, Sedtankarrayscript, Sedtankopenchannelscript, sedichanneltankscript, sedechanneltankscript, weirpipescapsscript, text) if (N_SedBays > 1 and N_SedTanks > 1)
    stack(Sedtanktankscript, Sedtanksubtractchannelscript, Sedtankexitchannelscript, Sedtankexitweirscript, Sedtankinletweirscript, Sedtankinletchannelscript, SedDrainCouplingScript, SedDrainPipeScript, SedDrainAdapterScript, SedDrainValveScript, Sedbottomslopescript, influentmanifoldscript, inletpipescript, Orificescript, Draincoverscript, Sedtanklaminascript, Pipeframescript, SedLaunderScriptNEW, launderholes, Sedtankarrayscript, Sedtankopenchannelscript, sedichanneltankscript, sedechanneltankscript, weirpipescapsscript, text) if (N_SedBays ≤ 1 and N_SedTanks > 1)
    stack(Sedtanktankscript, Sedtanksubtractchannelscript, Sedtankexitchannelscript, Sedtankexitweirscript, Sedtankinletweirscript, Sedtankinletchannelscript, SedDrainCouplingScript, SedDrainPipeScript, SedDrainAdapterScript, SedDrainValveScript, Sedbottomslopescript, influentmanifoldscript, inletpipescript, Orificescript, Draincoverscript, Sedtanklaminascript, Pipeframescript, SedLaunderScriptNEW, launderholes, Sedtankopenchannelscript, sedichanneltankscript, sedechanneltankscript, weirpipescapsscript, text) if (N_SedBays == 1 and N_SedTanks == 1)
    stack(Sedtanktankscript, Sedtanksubtractchannelscript, Sedtankexitchannelscript, Sedtankexitweirscript, Sedtankinletweirscript, Sedtankinletchannelscript, SedDrainCouplingScript, SedDrainPipeScript, SedDrainAdapterScript, SedDrainValveScript, Sedbottomslopescript, influentmanifoldscript, inletpipescript, Orificescript, Draincoverscript, Sedtanklaminascript, Pipeframescript, SedLaunderScriptNEW, launderholes, Sedtankopenchannelscript, sedichanneltankscript, sedechanneltankscript, weirpipescapsscript, text) if (N_SedBays > 1 and N_SedTanks == 1)
# [component: inputs AC_SedTank]
