# [reference: MasterProgram.xmcd]
Plant_Origin := [0; 0; 0]
# Concrete components of the sedimentation tank (excluding channels and launder ledge)
SedTankLayer := layer_new("SedTankCon", grey)
# viewrightside1
# ViewRightSide1
SedSlopePolyline :=
    if Z_SedLamellaBottom - (Plant_Origin[2] + H_SedSideSlopes + ConRadius(ND_SedPlateFrame) + outerradius(ND_SedPlateFrame)) > 0
        Pline([
            [Plant_Origin[1] + W_Sed; Plant_Origin[2]];
            [Plant_Origin[1] + W_Sed; Plant_Origin[2]] + [-W_SedBay/2 + W_SedSludge/2; Plant_Origin[2]];
            [Plant_Origin[1] + W_Sed; Plant_Origin[2]] + [-W_SedBay/2 + W_SedSludge/2; H_SedSludge];
            [Plant_Origin[1] + W_Sed; Plant_Origin[2]] + [-W_SedBay/2 + W_SedSludge/2 + T_ConcreteMin; H_SedSludge];
            [Plant_Origin[1] + W_Sed; Plant_Origin[2]] + [-W_SedBay/2 + W_SedSludge/2 + T_ConcreteMin; H_SedSludge + H_SedDrainCoverTotal];
            [Plant_Origin[1] + W_Sed; Plant_Origin[2]] + [
                -T_ConcreteMin;
                ((W_SedBay - W_SedSludge)/2 - 2*T_ConcreteMin)*tan(AN_SedSlope) + H_SedSludge + H_SedDrainCoverTotal
            ];
            [Plant_Origin[1] + W_Sed; 0 m] + [-T_ConcreteMin; Z_SedLamellaBottom - ConRadius(ND_SedPlateFrame) - outerradius(ND_SedPlateFrame)];
            [Plant_Origin[1] + W_Sed; 0 m] + [0 m; Z_SedLamellaBottom - ConRadius(ND_SedPlateFrame) - outerradius(ND_SedPlateFrame)];
            [Plant_Origin[1] + W_Sed; Plant_Origin[2]]
        ])
    otherwise
        Pline([
            [Plant_Origin[1] + W_Sed; Plant_Origin[2]];
            [Plant_Origin[1] + W_Sed; Plant_Origin[2]] + [-W_SedBay/2 + W_SedSludge/2; Plant_Origin[2]];
            [Plant_Origin[1] + W_Sed; Plant_Origin[2]] + [-W_SedBay/2 + W_SedSludge/2; H_SedSludge];
            [Plant_Origin[1] + W_Sed; Plant_Origin[2]] + [-W_SedBay/2 + W_SedSludge/2 + T_ConcreteMin; H_SedSludge];
            [Plant_Origin[1] + W_Sed; Plant_Origin[2]] + [-W_SedBay/2 + W_SedSludge/2 + T_ConcreteMin; H_SedSludge + H_SedDrainCoverTotal];
            [Plant_Origin[1] + W_Sed; Plant_Origin[2]] + [
                -T_ConcreteMin;
                ((W_SedBay - W_SedSludge)/2 - 2*T_ConcreteMin)*tan(AN_SedSlope) + H_SedSludge + H_SedDrainCoverTotal
            ];
            [Plant_Origin[1] + W_Sed; Plant_Origin[2]] + [
                0 m;
                ((W_SedBay - W_SedSludge)/2 - 2*T_ConcreteMin)*tan(AN_SedSlope) + H_SedSludge + H_SedDrainCoverTotal
            ];
            [Plant_Origin[1] + W_Sed; Plant_Origin[2]]
        ])
# viewrightside1
ExtrudeSedSlopes := extrude([Plant_Origin[0] + W_Sed; Plant_Origin[1]], -L_Sed)
MirrorSedSlopes := MirrorLast([Plant_Origin[1] + W_Sed - W_SedBay/2; Plant_Origin[2]], [Plant_Origin[1] + W_Sed - W_SedBay/2; Plant_Origin[2] + zc], "n")
# viewtop1
ArraySedSlopes := array_all(N_SedBays, 1, -W_SedBay)
# viewfront1
SedHopper :=
    if H_SedHopperBackSlope > 0 m and L_SedHopperExcess == 0
        Pline([
            [Plant_Origin[0]; Plant_Origin[2]];
            [Plant_Origin[0]; Plant_Origin[2]] + [-L_SedHopper - T_ConcreteMin; 0 m];
            [Plant_Origin[0]; Plant_Origin[2]] + [-L_SedHopper - T_ConcreteMin; Z_SedFlocWeir];
            [Plant_Origin[0]; Plant_Origin[2]] + [-L_SedHopper; Z_SedFlocWeir];
            [Plant_Origin[0]; Plant_Origin[2]] + [-L_SedHopperBackSlope; Z_SedHopperBottom];
            [Plant_Origin[0]; Plant_Origin[2]] + [0 m; H_SedHopperBackSlope + Z_SedHopperBottom];
            [Plant_Origin[0]; Plant_Origin[2]]
        ])
    if H_SedHopperBackSlope == 0 m and L_SedHopperExcess == 0 m
        Pline([
            [Plant_Origin[0]; Plant_Origin[2]];
            [Plant_Origin[0]; Plant_Origin[2]] + [-L_SedHopper - T_ConcreteMin; 0 m];
            [Plant_Origin[0]; Plant_Origin[2]] + [-L_SedHopper - T_ConcreteMin; Z_SedFlocWeir];
            [Plant_Origin[0]; Plant_Origin[2]] + [-L_SedHopper; Z_SedFlocWeir];
            [Plant_Origin[0]; Plant_Origin[2]] + [0 m; Z_SedHopperBottom];
            [Plant_Origin[0]; Plant_Origin[2]]
        ])
    if L_SedHopperExcess > 0 m
        Pline([
            [Plant_Origin[0]; Plant_Origin[2]];
            [Plant_Origin[0]; Plant_Origin[2]] + [-L_SedHopper - T_ConcreteMin; 0 m];
            [Plant_Origin[0]; Plant_Origin[2]] + [-L_SedHopper - T_ConcreteMin; Z_SedFlocWeir];
            [Plant_Origin[0]; Plant_Origin[2]] + [-L_SedHopper; Z_SedFlocWeir];
            [Plant_Origin[0]; Plant_Origin[2]] + [-L_SedHopper + L_SedHopperFrontSlope; Z_SedHopperBottom];
            [Plant_Origin[0]; Plant_Origin[2]] + [-L_SedHopperExcess; H_SedHopperBackSlope];
            [Plant_Origin[0]; Plant_Origin[2]] + [0 m; H_SedHopperBackSlope];
            [Plant_Origin[0]; Plant_Origin[2]]
        ])
# viewfront
ExtrudeSedHopper := extrude([Plant_Origin[0]; Plant_Origin[2]] + [-L_SedHopper - T_ConcreteMin; Z_SedFlocWeir], -W_Sed)
# viewtop
SedManifoldLedge := BoxF([
    -L_SedHopper - T_ConcreteMin + Plant_Origin[0];
    Plant_Origin[1];
    Z_SedManifoldPipe - ConRadius(ND_SedManifold)
], [
    -L_SedHopper - 2*T_ConcreteMin + Plant_Origin[0];
    W_Sed + Plant_Origin[1];
    Z_SedManifoldPipe - ConRadius(ND_SedManifold) - T_ConcreteMin
], [0; 0; 0]*deg)
SedManifoldSlope := WedgeF(Plant_Origin + [-L_Sed; 0 m; H_SedDrainCoverTotal + Z_SedSludge], [L_SedEndSlope; W_Sed; H_SedEndSlope] + Plant_Origin + [-L_Sed; 0 m; H_SedDrainCoverTotal + Z_SedSludge], [0; 0; 0]*deg)
SedManifoldSlopeBase := BoxF(Plant_Origin + [-L_Sed; 0 m; 0 m], [L_SedEndSlope; W_Sed; H_SedDrainCoverTotal + Z_SedSludge] + Plant_Origin + [-L_Sed; 0 m; 0 m], [0; 0; 0]*deg)
DrawSedTank := Tank(Plant_Origin, [L_Sed; W_Sed; H_Sed], T_PlantWall)
# unionall
FreezeSedTank := FreezeLayer("SedTankCon")
# this cuts a space for the channel on the side closest to the floc tank
SedInletChannelCut := BoxF([-L_Sed + W_SedInletChannel; W_Sed; H_Sed - H_SedInletChannel] + Plant_Origin, [-L_Sed; W_Sed + T_PlantWall; H_Sed] + Plant_Origin, [0; 0; 0]*deg)
SedExitChannelCut := BoxF(Plant_Origin + [0 m; W_Sed; H_Sed - H_SedExitChannel], Plant_Origin + [-W_SedExitChannel; W_Sed + T_PlantWall; H_Sed], [0; 0; 0]*deg)
MirrorSedChannelCuts := Mirror3dAll("zx", [Plant_Origin[0]; Plant_Origin[1] + W_Sed/2], "n")
GroupSedChannelCuts := GroupAll("DeleteMe")
SubtractSedChannelCuts := SubtractF(["SedTankCon"], "DeleteMe")
SedTankScript :=
    stack(SedTankLayer, viewrightside1, SedSlopePolyline, viewrightside1, ExtrudeSedSlopes, MirrorSedSlopes, viewfront1, SedHopper, viewfront1, ExtrudeSedHopper, viewtop1, SedManifoldLedge, SedManifoldSlope, SedManifoldSlopeBase, DrawSedTank, union_allA, FreezeSedTank, SedInletChannelCut, SedExitChannelCut, MirrorSedChannelCuts, GroupSedChannelCuts, SubtractSedChannelCuts) if N_SedBays == 1
    stack(SedTankLayer, viewrightside1, SedSlopePolyline, viewrightside1, ExtrudeSedSlopes, MirrorSedSlopes, viewtop1, ArraySedSlopes, viewfront1, SedHopper, viewfront1, ExtrudeSedHopper, viewtop1, SedManifoldLedge, SedManifoldSlope, SedManifoldSlopeBase, DrawSedTank, union_allA, FreezeSedTank, SedInletChannelCut, SedExitChannelCut, MirrorSedChannelCuts, GroupSedChannelCuts, SubtractSedChannelCuts) otherwise
SedChannelLayer := layer_new("SedChannelsCon", grey)
InletChannelVertBox := BoxF([-L_Sed + W_SedInletChannel; W_Sed; Z_SedChannelBottom] + Plant_Origin, [-L_Sed + W_SedInletChannel + T_ChannelWall; W_Sed - W_SedBay; H_Sed] + Plant_Origin, [0; 0; 0]*deg)
ExitChannelVertBox := BoxF([-W_SedExitChannel; W_Sed; Z_SedChannelBottom] + Plant_Origin, [-W_SedExitChannel - T_ChannelWall; W_Sed - W_SedBay; H_Sed] + Plant_Origin, [0; 0; 0]*deg)
InletChannelHorizBox := BoxF([-L_Sed; W_Sed; Z_SedChannelBottom] + Plant_Origin, [-L_Sed + W_SedInletChannel + T_ChannelWall; W_Sed - W_SedBay; Z_SedChannelBottom - T_ChannelWall] + Plant_Origin, [0; 0; 0]*deg)
ExitChannelHorizBox := BoxF([0 m; W_Sed; Z_SedChannelBottom] + Plant_Origin, [-W_SedExitChannel - T_ChannelWall; W_Sed - W_SedBay; Z_SedChannelBottom - T_ChannelWall] + Plant_Origin, [0; 0; 0]*deg)
SedLaunderLedge := BoxF([-L_Sed + W_SedInletChannel + T_ChannelWall; W_Sed; Z_SedLaunder - ConRadius(ND_SedLaunder)] + Plant_Origin, [
    -L_Sed + W_SedInletChannel + T_ChannelWall + T_ConcreteMin;
    W_Sed - W_SedBay;
    Z_SedLaunder - ConRadius(ND_SedLaunder) - T_ConcreteMin
] + Plant_Origin, [0; 0; 0]*deg)
# unionall
FreezeSedChannels := FreezeLayer("SedChannelsCon")
SedChannelScript := stack(SedChannelLayer, InletChannelVertBox, ExitChannelVertBox, InletChannelHorizBox, ExitChannelHorizBox, SedLaunderLedge, union_allA, FreezeSedChannels)
# Channels and Launder Ledge
# Manifold Components
# Manifold origins:
SedManCoupling_Origin := [
    -L_Sed + T_ConcreteMin + ConRadius(ND_SedManifold);
    W_Sed - W_SedBay/2;
    Z_SedChannelBottom - SocketDepth(ND_SedManifold)
] + Plant_Origin
SedManNipple_Origin := [0 m; 0 m; -CouplingLength(ND_SedManifold) + 2*SocketDepth(ND_SedManifold)] + SedManCoupling_Origin
SedManFlexCoupling_Origin := [0 m; 0 m; -(SocketDepth(ND_SedManifold) + max(0 m, T_PlantWall - CouplingLength(ND_SedManifold)))] + SedManNipple_Origin
SedManVertPipe_Origin := [0 m; 0 m; -CouplingLengthFlex(ND_SedManifold) + SocketDepthFlex(ND_SedManifold)] + SedManFlexCoupling_Origin
SedManElbow_Origin := [
    SedManVertPipe_Origin[0] + ElbowRadius(ND_SedManifold);
    SedManVertPipe_Origin[1];
    Z_SedManifoldPipe
]
SedManPipe_Origin := SedManElbow_Origin + [L_SedManifoldPipe; 0 m; 0 m]  # This is the same as the cap origin
SedManRigCouplingLayer := layer_new("SedManCouplingPlumbing", green)
SedManRigidCoupling := CouplingSUBF(SedManCoupling_Origin, [0; 270]*deg, ND_SedManifold, PS_Default, ["SedChannelsCon"])
SedManRigCouplingFrz := FreezeLayer("SedManCouplingPlumbing")
SedManNippleLayer := layer_new("SedManNippleCoupling", blue)
SedManNipple := PipeSUBF(SedManNipple_Origin, SocketDepthFlex(ND_SedManifold) + SocketDepth(ND_SedManifold) + max(0 m, T_PlantWall - CouplingLength(ND_SedManifold)), [0; 270]*deg, ND_SedManifold, PS_Default, ["SedChannelsCon"])
SedManNipFrz := FreezeLayer("SedManNippleCoupling")
SedManFlexCouplingLayer := layer_new("SedManFlexCouplingPlumbing", black)
SedManFlexCoupling := FlexCouplingF(SedManFlexCoupling_Origin, [0; 270]*deg, ND_SedManifold)
SedManFlexCouplingFrz := FreezeLayer("SedManFlexCouplingPlumbing")
SedManVertLayer := layer_new("SedManVertPipePlumbing", blue)
SedManVertPipe := PipeF(SedManVertPipe_Origin, SedManVertPipe_Origin[2] - Z_SedManifoldPipe - ElbowRadius(ND_SedManifold), [0; 270]*deg, ND_SedManifold, PS_Default)
SedManVertFrz := FreezeLayer("SedManVertPipePlumbing")
SedManElbowLayer := layer_new("SedManElbowPlumbing", green)
SedManElbow := ElbowF(SedManElbow_Origin, [90; 0; 270]*deg, ND_SedManifold, PS_Default)
SedManElbowFrz := FreezeLayer("SedManElbowPlumbing")
SedManPipeLayer := layer_new("SedManPipePlumbing", blue)
SedManPipe := PipeF(SedManPipe_Origin, L_SedManifoldPipe, [0; 0], ND_SedManifold, PS_Default)
SedManPipeFrz := FreezeLayer("SedManPipePlumbing")
SedManCapLayer := layer_new("SedManCapPlumbing", green)
SedManCap := CapF(SedManPipe_Origin, [0; 0; 0]*deg, ND_SedManifold)
SedManCapFrz := FreezeLayer("SedManCapPlumbing")
SedManOrifice := CylinderF(SedManPipe_Origin + [-3*B_SedManifoldPort/4; 0 m; 0 m], D_SedManifoldPort/2, ND_SedManifold, [0; 270]*deg)
ArraySedManOrifice := array_all(1, N_SedManifoldPorts, -B_SedManifoldPort)
GroupSedManOrifices := GroupAll("DeleteMe")
CreateOrificeRow := stack(SedManOrifice, ArraySedManOrifice, GroupSedManOrifices)
SubtractSedManOrifices := stack(SubtractF(["SedManCapPlumbing"], "DeleteMe"), CreateOrificeRow, SubtractF(["SedManCapPlumbing"], "DeleteMe"))
SedManifoldScript := stack(SedManRigCouplingLayer, SedManRigidCoupling, SedManRigCouplingFrz, SedManNippleLayer, SedManNipple, SedManNipFrz, SedManFlexCouplingLayer, SedManFlexCoupling, SedManFlexCouplingFrz, SedManVertLayer, SedManVertPipe, SedManVertFrz, SedManElbowLayer, SedManElbow, SedManElbowFrz, SedManPipeLayer, SedManPipe, SedManPipeFrz, SedManCapLayer, SedManCap, SedManCapFrz, CreateOrificeRow, SubtractSedManOrifices)
# Launder Components
# Launder origins:
SedLaunderCoupling_Origin := [-W_SedExitChannel - SocketDepth(ND_SedLaunder); W_Sed - W_SedBay/2; Z_SedLaunder] + Plant_Origin
SedLaunderNipple_Origin := SedLaunderCoupling_Origin + [-CouplingLength(ND_SedLaunder) + 2*SocketDepth(ND_SedLaunder); 0 m; 0 m]
SedLaunderFlexCoupling_Origin := SedLaunderNipple_Origin - [SocketDepth(ND_SedLaunder) + max(0 m, T_PlantWall - CouplingLength(ND_SedLaunder)); 0 m; 0 m]
SedLaunderPipe_Origin := SedLaunderFlexCoupling_Origin - [SocketDepthFlex(ND_SedLaunder); 0 m; 0 m]
SedLaunderCap_Origin := SedLaunderPipe_Origin - [L_SedLaunder; 0 m; 0 m]
SedLaunderCouplingLayer := layer_new("SedLaunderCouplingPlumbing", green)
SedLaunderCoupling := CouplingSUBF(SedLaunderCoupling_Origin, [0; 0]*deg, ND_SedLaunder, PS_Default, ["SedChannelsCon"])
SedLaunderCouplingFrz := FreezeLayer("SedLaunderCouplingPlumbing")
SedLaunderNippleLayer := layer_new("SedLaunderNipplePlumbing", blue)
SedLaunderNipple := PipeSUBF(SedLaunderNipple_Origin, SocketDepth(ND_SedLaunder) + SocketDepthFlex(ND_SedLaunder) + max(0 m, T_PlantWall - CouplingLength(ND_SedLaunder)), [0; 0]*deg, ND_SedLaunder, PS_Default, ["SedChannelsCon"])
SedLaunderNippleFrz := FreezeLayer("SedLaunderNipplePlumbing")
SedLaunderFlexLayer := layer_new("SedLaunderFlexCouplingPlumbing", black)
SedLaunderFlexCoupling := FlexCouplingF(SedLaunderFlexCoupling_Origin, [0; 0]*deg, ND_SedLaunder)
SedLaunderFlexFrz := FreezeLayer("SedLaunderFlexCouplingPlumbing")
SedLaunderPipeLayer := layer_new("SedLaunderPipePlumbing", blue)
SedLaunderPipe := PipeF(SedLaunderPipe_Origin, L_SedLaunder, [0; 0]*deg, ND_SedLaunder, PS_Default)
SedLaunderPipeFrz := FreezeLayer("SedLaunderPipePlumbing")
SedLaunderCapLayer := layer_new("SedLaunderCapPlumbing", green)
SedLaunderCap := CapF(SedLaunderCap_Origin, [0; 180]*deg, ND_SedLaunder)
SedLaunderCapFrz := FreezeLayer("SedLaunderCapPlumbing")
SedLaunderOrifice := CylinderF([-CouplingLengthFlex(ND_SedLaunder) - D_SedLaunderOrifice; 0 m; 0 m] + SedLaunderPipe_Origin, D_SedLaunderOrifice/2, ND_SedLaunder, [30; 90]*deg)
ArraySedLaunderOrifices := array_all(1, N_SedLaunderOrifices, -B_SedLaunderOrifices)
MirrorSedLaunderOrifices := Mirror3dAll("zx", [Plant_Origin[0]; SedLaunderPipe_Origin[1]], "n")
GroupLaunderOrifices := GroupAll("DeleteMe")
SubtractLaunderOrifices := SubtractF(["SedLaunderPipePlumbing"], "DeleteMe")
SedLaunderScript := stack(SedLaunderCouplingLayer, SedLaunderCoupling, SedLaunderCouplingFrz, SedLaunderNippleLayer, SedLaunderNipple, SedLaunderNippleFrz, SedLaunderFlexLayer, SedLaunderFlexCoupling, SedLaunderFlexFrz, SedLaunderPipeLayer, SedLaunderPipe, SedLaunderPipeFrz, SedLaunderCapLayer, SedLaunderCap, SedLaunderCapFrz, SedLaunderOrifice, ArraySedLaunderOrifices, MirrorSedLaunderOrifices, GroupLaunderOrifices, SubtractLaunderOrifices)
# Floc Hopper Drain
SedHopperDrainCoupling_Origin := [
    -SocketDepth(ND_SedHopperDrain) + T_PlantWall;
    W_Sed - W_SedBay/2;
    Z_SedHopperBottom + outerradius(ND_SedHopperDrain)
] + Plant_Origin
SedHopperDrainPipe_Origin := SedHopperDrainCoupling_Origin + [2*SocketDepth(ND_SedHopperDrain) - CouplingLength(ND_SedHopperDrain); 0 m; 0 m]
SedHopperDrainAdapter_Origin := SedHopperDrainCoupling_Origin + [2*SocketDepth(ND_SedHopperDrain); 0 m; 0 m]  # same as nipple origin
SedHopperDrainValve_Origin := SedHopperDrainAdapter_Origin + [
    MaleAdapterLength(ND_SedHopperDrain) - SocketDepth(ND_SedHopperDrain) + ValveLength(ND_SedHopperDrain);
    0 m;
    0 m
]
SedHopperDrainElbow_Origin := SedHopperDrainValve_Origin + [SocketDepth(ND_SedHopperDrain); 0 m; 0 m]  # also nipple origin
SedHopperDrainLayer := layer_new("SedHopperDrain", blue)  # same as origin for nipple to elbow
SedHopperDrainPipe := PipeSUBF(SedHopperDrainPipe_Origin, L_SedHopperDrainPipe, [0; 0]*deg, ND_SedHopperDrain, PS_Default, ["SedTankCon"])
SedHopperDrainCoupling := CouplingSUBF(SedHopperDrainCoupling_Origin, [0; 0]*deg, ND_SedHopperDrain, PS_Default, ["SedTankCon"])
SedHopperDrainNippleToAdapter := PipeSUBF(SedHopperDrainAdapter_Origin, 2*SocketDepth(ND_SedHopperDrain), [0; 0]*deg, ND_SedHopperDrain, PS_Default, ["SedTankCon"])
SedHopperDrainAdapter := MaleAdapterF(SedHopperDrainAdapter_Origin, [180; 0]*deg, ND_SedHopperDrain, PS_Default)
SedHopperDrainValve := insertdwg("VAL-Scaled-Gate-Valve-Threaded", SedHopperDrainValve_Origin, 2*outerradius(ND_SedHopperDrain)/(1.16 m), 2*outerradius(ND_SedHopperDrain)/(1.16 m), 0 deg)
SedHopperDrainNippleToElbow := PipeF(SedHopperDrainElbow_Origin, ValveSocket(ND_SedHopperDrain) + SocketDepth(ND_SedHopperDrain), [0; 0]*deg, ND_SedHopperDrain, PS_Default)
SedHopperDrainElbow := ElbowF(SedHopperDrainElbow_Origin, [270; 0; 225]*deg, ND_SedHopperDrain, PS_Default)
FreezeSedDrainHopper := FreezeLayer("SedHopperDrain")
SedHopperDrainScript := stack(SedHopperDrainLayer, SedHopperDrainPipe, SedHopperDrainCoupling, SedHopperDrainNippleToAdapter, SedHopperDrainAdapter, SedHopperDrainValve, SedHopperDrainNippleToElbow, SedHopperDrainElbow, FreezeSedDrainHopper)
# Sludge Drain Cover
SedDrainCoverLayer := layer_new("SedDrainCoverCon", ltgrey)
SedDrainCoverPline := Pline3D([
    [
        Plant_Origin[0] - L_SedHopper - T_ConcreteMin;
        Plant_Origin[1] + W_Sed - (W_SedBay + W_SedDrainCover)/2;
        Plant_Origin[2] + H_SedSludge
    ];
    [
        Plant_Origin[0] - L_SedHopper - T_ConcreteMin;
        Plant_Origin[1] + W_Sed - (W_SedBay + W_SedDrainCover)/2;
        Plant_Origin[2] + H_SedSludge + H_SedDrainCoverTotal
    ];
    [
        Plant_Origin[0] - L_SedHopper - T_ConcreteMin;
        Plant_Origin[1] + W_Sed - W_SedBay/2 - outerradius(ND_SedJetReverser)*cos(AN_SedPlate);
        Plant_Origin[2] + T_ConcreteMin + outerradius(ND_SedJetReverser)*(1 + sin(AN_SedPlate))
    ];
    [
        Plant_Origin[0] - L_SedHopper - T_ConcreteMin;
        Plant_Origin[1] + W_Sed - W_SedBay/2 + outerradius(ND_SedJetReverser)*cos(AN_SedPlate);
        Plant_Origin[2] + T_ConcreteMin + outerradius(ND_SedJetReverser)*(1 + sin(AN_SedPlate))
    ];
    [
        Plant_Origin[0] - L_SedHopper - T_ConcreteMin;
        Plant_Origin[1] + W_Sed - (W_SedBay - W_SedDrainCover)/2;
        Plant_Origin[2] + H_SedSludge + H_SedDrainCoverTotal
    ];
    [
        Plant_Origin[0] - L_SedHopper - T_ConcreteMin;
        Plant_Origin[1] + W_Sed - (W_SedBay - W_SedDrainCover)/2;
        Plant_Origin[2] + H_SedSludge
    ];
    [
        Plant_Origin[0] - L_SedHopper - T_ConcreteMin;
        Plant_Origin[1] + W_Sed - (W_SedBay + W_SedDrainCover)/2;
        Plant_Origin[2] + H_SedSludge
    ]
])
# viewfront1
ExtrudeSedDrainCover := extrude([
    Plant_Origin[1] + W_Sed - W_SedBay/2 - outerradius(ND_SedJetReverser)*cos(AN_SedPlate);
    Plant_Origin[2] + T_ConcreteMin + outerradius(ND_SedJetReverser)*(1 + sin(AN_SedPlate))
], -L_SedDrainCoverSegment)
# viewtop1
FreezeSedDrainCover := FreezeLayer("SedDrainCoverCon")
SedJetRedirect := CylinderF([
    -L_SedHopper - T_ConcreteMin + zc/2;
    W_Sed - W_SedBay/2;
    H_SedSludge + T_ConcreteMin + outerradius(ND_SedJetReverser)
] + Plant_Origin, outerradius(ND_SedJetReverser), L_SedDrainCoverSegment + zc, [0; 0]*deg)
N_SedDrainCoverSegmentOrifices
SedDrainCoverOrifices := CylinderF([
    -L_SedHopper - T_ConcreteMin + (-(L_SedDrainCoverSegment - B_SedSludgeOrifices*(N_SedDrainCoverSegmentOrifices - 1))/2);
    W_Sed - W_SedBay/2;
    H_SedSludge + T_ConcreteMin + outerradius(ND_SedJetReverser)
] + Plant_Origin, D_SedSludgeOrifice/2, H_SedDrainCoverTotal, [0; 270]*deg)
ArraySedDrainOrifices := ArrayLast(1, N_SedDrainCoverSegmentOrifices, -B_SedSludgeOrifices)
GroupSedDrainCuts := GroupAll("DeleteMe")
SubtractSedDrainCuts := SubtractF(["SedDrainCoverCon"], "DeleteMe")
ThawSedDrainCover := SelectLayer("SedDrainCoverCon")
ArraySedDrainCover := ArrayLast(1, N_SedDrainCover, -L_SedDrainCoverSegment - S_SedDrainCoverSegment)
SedDrainCoverScript := stack(SedDrainCoverLayer, SedDrainCoverPline, viewrightside1, ExtrudeSedDrainCover, viewtop1, FreezeSedDrainCover, SedJetRedirect, SedDrainCoverOrifices, ArraySedDrainOrifices, GroupSedDrainCuts, SubtractSedDrainCuts, ThawSedDrainCover, ArraySedDrainCover, FreezeSedDrainCover)
# Lamella Pipe Frame
SedPipeFrame_Origin := [
    Plant_Origin[0] - W_SedExitChannel - T_ChannelWall - L_SedPlate*cos(60 deg) - outerradius(ND_SedFrameStub) + B_SedPlate/sin(AN_SedPlate) - T_SedPlate/sin(AN_SedPlate);
    Plant_Origin[1];
    Z_SedLamellaBottom - outerradius(ND_SedPlateFrame)
]
SedPipeFrameLayer := layer_new("SedPipeFrame", yellow)
PFPipeLong1 := PipeF([SedPipeFrame_Origin[0]; Plant_Origin[1] + B_SedPlateFrameVertical; SedPipeFrame_Origin[2]], SedPipeFrame_Origin[0] - Plant_Origin[0] + L_Sed, [0; 0]*deg, ND_SedPlateFrame, PS_Default)
PFPipeLong2 := PipeF([
    SedPipeFrame_Origin[0];
    Plant_Origin[1] + W_SedBay - B_SedPlateFrameVertical;
    SedPipeFrame_Origin[2]
], SedPipeFrame_Origin[0] - Plant_Origin[0] + L_Sed, [0; 0]*deg, ND_SedPlateFrame, PS_Default)
DrawPFStub := PipeF([
    SedPipeFrame_Origin[0];
    Plant_Origin[1] + B_SedPlateFrameVertical;
    SedPipeFrame_Origin[2] + outerradius(ND_SedPlateFrame)
], H_SedFrameStub, [0; 90]*deg, ND_SedFrameStub, 1)
ArrayPFStubRow := ArrayLast(1, N_SedModules + 1, -B_SedFrameStub)
ArrayPFStubColumn := ArrayLast(2, 1, W_SedBay - 2*B_SedPlateFrameVertical)
ArrayPFPieces := array_all(N_SedBays, 1, W_SedBay)
PipeFrameArrayPieces :=
    stack(SedPipeFrameLayer, PFPipeLong1, PFPipeLong2, DrawPFStub, ArrayPFStubRow, ArrayPFStubColumn) if N_SedBays == 1
    stack(SedPipeFrameLayer, PFPipeLong1, PFPipeLong2, DrawPFStub, ArrayPFStubRow, ArrayPFStubColumn, ArrayPFPieces) otherwise
PFPipePerpendicular := PipeF(SedPipeFrame_Origin, W_SedBay*N_SedBays, [270; 0]*deg, ND_SedPlateFrame, PS_Default)
ArrayPFPerp := ArrayLast(1, 3, -min(L_SedActive, L_Sed - W_SedExitChannel - T_ChannelWall - cos(AN_SedPlate)*L_SedPlate - 2*S_Fitting - 2*ConRadius(ND_SedManifold) - outerradius(ND_SedPlateFrame))/2)
FreezeSedPipeFrame := FreezeLayer("SedPipeFrame")
PFSLayer := layer_new("SedPipeFrameSupport", yellow)
DrawPFSFlange := CylinderF([
    SedPipeFrame_Origin[0];
    SedPipeFrame_Origin[1] + W_Sed - W_SedBay;
    SedPipeFrame_Origin[2] - outerdiameter(ND_SedPlateFrame)/2
], D_Flange/2, T_Flange, [0; 270]*deg)
DrawPFSPipe := CylinderF([
    SedPipeFrame_Origin[0];
    SedPipeFrame_Origin[1] + W_SedBay;
    SedPipeFrame_Origin[2] - outerdiameter(ND_SedPlateFrame)/2 - T_Flange
], outerradius(ND_SedPlateFrame), SedPipeFrame_Origin[2] - outerradius(ND_SedPlateFrame) - T_Flange - (((W_SedBay - W_SedSludge)/2 - 2*T_ConcreteMin)*tan(AN_SedSlope) + H_SedSludge + H_SedDrainCoverTotal), [0; 270]*deg)
ArrayPFS := array_all(1, 3, -min(L_SedActive, L_Sed - W_SedExitChannel - T_ChannelWall - cos(AN_SedPlate)*L_SedPlate - 2*S_Fitting - 2*ConRadius(ND_SedManifold) - outerradius(ND_SedPlateFrame))/2)
FreezePFS := FreezeLayer("SedPipeFrameSupport")
SedPipeFrameScript :=
    stack(PipeFrameArrayPieces, PFPipePerpendicular, ArrayPFPerp, FreezeSedPipeFrame, PFSLayer, DrawPFSFlange, DrawPFSPipe, ArrayPFS, FreezePFS) if N_SedBays > 1 and Z_SedLamellaBottom - (Plant_Origin[2] + H_SedSideSlopes + 2*ConRadius(ND_SedPlateFrame)) ≠ 0 m
    stack(PipeFrameArrayPieces, PFPipePerpendicular, ArrayPFPerp) otherwise
# Lamella
SedLaminaLayer := layer_new("SedLamina", purple)
Lamina_Origin := [
    Plant_Origin[0] - W_SedExitChannel - T_PlantWall - cos(AN_SedPlate)*L_SedPlate;
    Plant_Origin[1] + W_Sed - W_SedBay;
    Z_SedLamellaBottom + Plant_Origin[2]
]
DrawSedLamina := LaminaF(Lamina_Origin, AN_SedPlate, N_SedModulePlates, N_SedModules, W_SedBay, L_SedPlate, T_SedPlate, B_SedPlate, H_SedFrameStub, ND_SedFrameStub, ND_SedModulePipe, PS_Modules, ND_SedModulePipeSpace, PS_Modules)
FreezeSedLam := FreezeLayer("SedLamina")
SedTankLaminaScript := stack(SedLaminaLayer, DrawSedLamina, FreezeSedLam)
# Sludge Drain
SedSludgeDrainCoupling_Origin := [
    -SocketDepth(ND_SedSludgePipe) + T_PlantWall;
    W_Sed - W_SedBay/2;
    H_SedSludge - outerradius(ND_SedSludgePipe)
] + Plant_Origin
SedSludgeDrainPipe_Origin := SedSludgeDrainCoupling_Origin + [2*SocketDepth(ND_SedSludgePipe) - CouplingLength(ND_SedSludgePipe); 0 m; 0 m]
SedSludgeDrainAdapter_Origin := SedSludgeDrainCoupling_Origin + [
    3*SocketDepth(ND_SedHopperDrain) + MaleAdapterLength(ND_SedHopperDrain) + 1.5*ValveLength(ND_SedHopperDrain) + ElbowRadius(ND_SedHopperDrain);
    0 m;
    0 m
]
SedSludgeDrainValve_Origin := SedSludgeDrainAdapter_Origin + [
    MaleAdapterLength(ND_SedSludgePipe) - SocketDepth(ND_SedSludgePipe) + ValveLength(ND_SedSludgePipe);
    0 m;
    0 m
]
SedSludgeDrainElbow_Origin := SedSludgeDrainValve_Origin + [SocketDepth(ND_SedSludgePipe); 0 m; 0 m]
SedSludgeDrainLayer := layer_new("SedSludgeDrain", blue)
SedSludgeDrainPipe := PipeSUBF(SedSludgeDrainPipe_Origin, L_SedHopper + T_ConcreteMin + SocketDepth(ND_SedSludgePipe) + max(0 m, T_PlantWall - CouplingLength(ND_SedSludgePipe)), [0; 0]*deg, ND_SedSludgePipe, PS_Default, ["SedTankCon"])
SedSludgeDrainCoupling := CouplingSUBF(SedSludgeDrainCoupling_Origin, [0; 0]*deg, ND_SedSludgePipe, PS_Default, ["SedTankCon"])
SedSludgeDrainNippleToAdapter := PipeSUBF(SedSludgeDrainAdapter_Origin, 3*SocketDepth(ND_SedHopperDrain) + MaleAdapterLength(ND_SedHopperDrain) + 1.5*ValveLength(ND_SedHopperDrain) + ElbowRadius(ND_SedHopperDrain), [0; 0]*deg, ND_SedSludgePipe, PS_Default, ["SedTankCon"])
SedSludgeDrainAdapter := MaleAdapterF(SedSludgeDrainAdapter_Origin, [180; 0]*deg, ND_SedSludgePipe, PS_Default)
SedSludgeDrainValve := insertdwg("VAL-Scaled-Gate-Valve-Threaded", SedSludgeDrainValve_Origin, 2*outerradius(ND_SedSludgePipe)/(1.16 m), 2*outerradius(ND_SedSludgePipe)/(1.16 m), 0 deg)
SedSludgeDrainNippleToElbow := PipeF(SedSludgeDrainElbow_Origin, ValveSocket(ND_SedSludgePipe) + SocketDepth(ND_SedSludgePipe), [0; 0]*deg, ND_SedSludgePipe, PS_Default)
SedSludgeDrainElbow := ElbowF(SedSludgeDrainElbow_Origin, [270; 0; 225]*deg, ND_SedSludgePipe, PS_Default)
FreezeSedSludgeDrain := FreezeLayer("SedSludgeDrain")
SedSludgeScript := stack(SedSludgeDrainLayer, SedSludgeDrainPipe, SedSludgeDrainCoupling, SedSludgeDrainNippleToAdapter, SedSludgeDrainAdapter, SedSludgeDrainValve, SedSludgeDrainNippleToElbow, SedSludgeDrainElbow, FreezeSedSludgeDrain)
# Diffuser
circle2(OriginPoint, Radius) := concat("c", sp, point(OriginPoint[:, 0]), sp, stringit(Radius))
SedDiffuser_Origin := [
    SedManPipe_Origin[0] - B_SedManifoldPort/2;
    SedManPipe_Origin[1];
    SedManPipe_Origin[2] - outerradius(ND_SedManifold)
]
SedDiffLayer := layer_new("SedManifoldDiffuserPlumbing", blue)
SedDiffOuterCircleSection := circle2([SedDiffuser_Origin[0]; SedDiffuser_Origin[1]; SedDiffuser_Origin[2]], outerradius(ND_SedDiffuser))
SedDiffOuterRectangleSection := Pline3D([
    [
        SedDiffuser_Origin[0] + L_SedDiffuserOutlet/2 + T_SedDiffuserWall/Pi_PvcStretch;
        SedDiffuser_Origin[1] + W_SedDiffuserOutlet/2 + T_SedDiffuserWall/Pi_PvcStretch;
        SedDiffuser_Origin[2] - L_SedManifoldDiffuser
    ];
    [
        SedDiffuser_Origin[0] - L_SedDiffuserOutlet/2 - T_SedDiffuserWall/Pi_PvcStretch;
        SedDiffuser_Origin[1] + W_SedDiffuserOutlet/2 + T_SedDiffuserWall/Pi_PvcStretch;
        SedDiffuser_Origin[2] - L_SedManifoldDiffuser
    ];
    [
        SedDiffuser_Origin[0] - L_SedDiffuserOutlet/2 - T_SedDiffuserWall/Pi_PvcStretch;
        SedDiffuser_Origin[1] - W_SedDiffuserOutlet/2 - T_SedDiffuserWall/Pi_PvcStretch;
        SedDiffuser_Origin[2] - L_SedManifoldDiffuser
    ];
    [
        SedDiffuser_Origin[0] + L_SedDiffuserOutlet/2 + T_SedDiffuserWall/Pi_PvcStretch;
        SedDiffuser_Origin[1] - W_SedDiffuserOutlet/2 - T_SedDiffuserWall/Pi_PvcStretch;
        SedDiffuser_Origin[2] - L_SedManifoldDiffuser
    ];
    [
        SedDiffuser_Origin[0] + L_SedDiffuserOutlet/2 + T_SedDiffuserWall/Pi_PvcStretch;
        SedDiffuser_Origin[1] + W_SedDiffuserOutlet/2 + T_SedDiffuserWall/Pi_PvcStretch;
        SedDiffuser_Origin[2] - L_SedManifoldDiffuser
    ]
])
SedDiffZoomOuter := zoom_win([SedDiffuser_Origin[0] - L_SedDiffuserOutlet; SedDiffuser_Origin[1] + W_SedDiffuserOutlet], [SedDiffuser_Origin[0] + L_SedDiffuserOutlet; SedDiffuser_Origin[1] - W_SedDiffuserOutlet])
SedDiffOuterLoft := Loft([SedDiffuser_Origin[0] + outerradius(ND_SedDiffuser); SedDiffuser_Origin[1]; SedDiffuser_Origin[2]], [
    SedDiffuser_Origin[0] + L_SedDiffuserOutlet/2 + T_SedDiffuserWall/Pi_PvcStretch;
    SedDiffuser_Origin[1] + W_SedDiffuserOutlet/2 + T_SedDiffuserWall/Pi_PvcStretch;
    SedDiffuser_Origin[2] - L_SedManifoldDiffuser
])
SedDiffuserFreeze1 := FreezeLayer("SedManifoldDiffuserPlumbing")
SedDiffInnerCircleSection := circle2([SedDiffuser_Origin[0]; SedDiffuser_Origin[1]; SedDiffuser_Origin[2]], innerdiameter(ND_SedDiffuser, PS_Default)/2)
SedDiffInnerRectangleSection := Pline3D([
    [
        SedDiffuser_Origin[0] + L_SedDiffuserOutlet/2;
        SedDiffuser_Origin[1] + W_SedDiffuserOutlet/2;
        SedDiffuser_Origin[2] - L_SedManifoldDiffuser
    ];
    [
        SedDiffuser_Origin[0] - L_SedDiffuserOutlet/2;
        SedDiffuser_Origin[1] + W_SedDiffuserOutlet/2;
        SedDiffuser_Origin[2] - L_SedManifoldDiffuser
    ];
    [
        SedDiffuser_Origin[0] - L_SedDiffuserOutlet/2;
        SedDiffuser_Origin[1] - W_SedDiffuserOutlet/2;
        SedDiffuser_Origin[2] - L_SedManifoldDiffuser
    ];
    [
        SedDiffuser_Origin[0] + L_SedDiffuserOutlet/2;
        SedDiffuser_Origin[1] - W_SedDiffuserOutlet/2;
        SedDiffuser_Origin[2] - L_SedManifoldDiffuser
    ];
    [
        SedDiffuser_Origin[0] + L_SedDiffuserOutlet/2;
        SedDiffuser_Origin[1] + W_SedDiffuserOutlet/2;
        SedDiffuser_Origin[2] - L_SedManifoldDiffuser
    ]
])
SedDiffZoomInner := zoom_win([SedDiffuser_Origin[0] - L_SedDiffuserOutlet; SedDiffuser_Origin[1] + W_SedDiffuserOutlet], [SedDiffuser_Origin[0] + L_SedDiffuserOutlet; SedDiffuser_Origin[1] - W_SedDiffuserOutlet])
SedDiffInnerLoft := Loft([
    SedDiffuser_Origin[0] + innerdiameter(ND_SedDiffuser, PS_Default)/2;
    SedDiffuser_Origin[1];
    SedDiffuser_Origin[2]
], [
    SedDiffuser_Origin[0] + L_SedDiffuserOutlet/2;
    SedDiffuser_Origin[1] + W_SedDiffuserOutlet/2;
    SedDiffuser_Origin[2] - L_SedManifoldDiffuser
])
SedDiffGroupInner := GroupAll("DeleteMe")
SedDiffSubtract := SubtractF(["SedManifoldDiffuserPlumbing"], "DeleteMe")
SedDiffSelect := SelectLayer("SedManifoldDiffuserPlumbing")
SedDiffArray := Array_All(1, N_SedManifoldPorts, -B_SedManifoldPort)
SedDiffuserFreeze2 := FreezeLayer("SedManifoldDiffuserPlumbing")
SedDiffuserScript := stack(SedDiffLayer, SedDiffOuterCircleSection, SedDiffOuterRectangleSection, SedDiffZoomOuter, SedDiffOuterLoft, SedDiffuserFreeze1, SedDiffInnerCircleSection, SedDiffInnerRectangleSection, SedDiffZoomInner, SedDiffInnerLoft, SedDiffGroupInner, SedDiffSubtract, SedDiffSelect, SedDiffArray, SedDiffuserFreeze2)
ThawAllSed := layer_thaw("Sed*")
FreezeSedFrameTank := stack(layer_freeze("SedTankCon"), layer_freeze("SedPipeFrame"), layer_freeze("SedPipeFrameSupport"))
ArraySedBay := Array_All(N_SedBays, 1, -W_SedBay)
ArraySedTank := Array_All(N_SedTanks, 1, W_Sed + T_PlantWall)
FreezeAllSed := layer_freeze("Sed*")
# Array Sed Tanks and Bays
# Inlet and Exit Channel Weirs
SedIChannelWeirParallel_Origin := [
    Plant_Origin[0] - L_Sed + W_SedInletChannelPreWeir;
    Plant_Origin[1] + L_SedChannel;
    Plant_Origin[2] + Z_SedChannelBottom
]
SedIChannelWeirParallel_Dim := [T_SedWeir; -L_SedChannel + W_SedInletChannelDrainBox; H_SedWeirInlet]
SedIChannelWeirPerp_Origin := [
    Plant_Origin[0] - L_Sed;
    Plant_Origin[1] + W_SedInletChannelDrainBox;
    Plant_Origin[2] + Z_SedChannelBottom
]
SedIChannelWeirPerp_Dim :=
    [W_SedInletChannelPreWeir; T_SedWeir; H_SedWeirInlet] if EN_InletChannelGeom == Parallel_Weir
    [W_SedInletChannel; T_SedWeir; H_SedWeirInlet] otherwise
SelectSedChannelLayer := SelectLayer("SedChannelsCon")
SedInletParallelWeir := BoxF(SedIChannelWeirParallel_Origin, SedIChannelWeirParallel_Origin + SedIChannelWeirParallel_Dim, [0; 0; 0]*deg)
SedInletPerpWeir := BoxF(SedIChannelWeirPerp_Origin, SedIChannelWeirPerp_Origin + SedIChannelWeirPerp_Dim, [0; 0; 0]*deg)
SedEChannelWeirParallel_Origin := [
    Plant_Origin[0] - W_SedExitChannelPostWeir;
    Plant_Origin[1] + L_SedChannel - W_SedExitChannelDrainBox;
    Plant_Origin[2] + Z_SedChannelBottom
]
SedEChannelWeirParallel_Dim := [-T_SedWeir; -L_SedChannel + W_SedExitChannelDrainBox; H_SedWeirExit]
SedEChannelWeirPerp_Origin := [
    Plant_Origin[0];
    Plant_Origin[1] + L_SedChannel - W_SedExitChannelDrainBox;
    Plant_Origin[2] + Z_SedChannelBottom
]
SedEChannelWeirPerp_Dim :=
    [-W_SedExitChannelPostWeir; -T_SedWeir; H_SedWeirExit] if EN_ExitChannelGeom == Parallel_Weir
    [-W_SedExitChannel; -T_SedWeir; H_SedWeirExit] otherwise
SedExitParallelWeir := BoxF(SedEChannelWeirParallel_Origin, SedEChannelWeirParallel_Origin + SedEChannelWeirParallel_Dim, [0; 0; 0]*deg)
SedExitPerpWeir := BoxF(SedEChannelWeirPerp_Origin, SedEChannelWeirPerp_Origin + SedEChannelWeirPerp_Dim, [0; 0; 0]*deg)
SedWeirUnion := Union_All
SedChannelWeirScript :=
    stack(SelectSedChannelLayer, SedInletParallelWeir, SedInletPerpWeir, SedExitParallelWeir, SedExitPerpWeir, SedWeirUnion, FreezeSedChannels) if EN_InletChannelGeom == Parallel_Weir and EN_ExitChannelGeom == Parallel_Weir
    stack(SelectSedChannelLayer, SedInletParallelWeir, SedInletPerpWeir, SedExitPerpWeir, SedWeirUnion, FreezeSedChannels) if EN_InletChannelGeom == Parallel_Weir and EN_ExitChannelGeom == Perpendicular_Weir
    stack(SelectSedChannelLayer, SedInletPerpWeir, SedExitParallelWeir, SedExitPerpWeir, SedWeirUnion, FreezeSedChannels) if EN_InletChannelGeom == Perpendicular_Weir and EN_ExitChannelGeom == Parallel_Weir
    stack(SelectSedChannelLayer, SedInletPerpWeir, SedExitPerpWeir, SedWeirUnion, FreezeSedChannels) if EN_InletChannelGeom == Perpendicular_Weir and EN_ExitChannelGeom == Perpendicular_Weir
# Inlet Channel Drain
SedIChannelDrainVertCoupling_Origin := [
    Plant_Origin[0] - L_Sed + S_Fitting + ConRadius(ND_SedInletChannelDrain);
    Plant_Origin[1] + S_Fitting + ConRadius(ND_SedInletChannelDrain);
    Plant_Origin[2] + Z_SedChannelBottom - CouplingLength(ND_SedInletChannelDrain) + SocketDepth(ND_SedInletChannelDrain)
]
SedIChannelDrainVertCouplingLayer := layer_new("SedIChannelVertCouplingPlumbing", green)
SedIChannelDrainVerCoupling := CouplingSUBF(SedIChannelDrainVertCoupling_Origin, [0; 90; 0]*deg, ND_SedInletChannelDrain, PS_Default, ["SedChannelsCon"])
SedIChannelVertCouplingFrz := FreezeLayer("SedIChannelVertCouplingPlumbing")
L_SedIChannelVertPipe := Z_SedChannelBottom - CouplingLength(ND_SedInletChannelDrain) - ElbowRadius(ND_SedInletChannelDrain) - ConRadius(ND_SedInletChannelDrain) + SocketDepth(ND_SedInletChannelDrain)
SedIChannelDrainSubCyl := CylinderF(SedIChannelDrainVertCoupling_Origin, outerradius(ND_SedInletChannelDrain), L_SedIChannelVertPipe, [0; 270]*deg)
SedGroupSubCyl := GroupAll("DeleteMe")
SedChannelCylSub := SubtractF(["SedChannelsCon"], "DeleteMe")
SedIChannelDrainVertPipeLayer := layer_new("SedIChannelVertPipePlumbing", blue)
SedIChannelDrainVertPipe := PipeSUBF(SedIChannelDrainVertCoupling_Origin, L_SedIChannelVertPipe, [0; 270; 0]*deg, ND_SedInletChannelDrain, PS_Default, ["SedTankCon"])
SedIChannelVertPipeFrz := FreezeLayer("SedIChannelVertPipePlumbing")
SedIChannelElbowLayer := layer_new("SedIChannelElbowPlumbing", green)
SedIChannelDrainElbow := ElbowSUBF(SedIChannelDrainVertCoupling_Origin + [0 m; 0 m; -L_SedIChannelVertPipe], [180; 0; 90]*deg, ND_SedInletChannelDrain, PS_Default, ["SedTankCon"])
SedIChannelElbowFrz := FreezeLayer("SedIChannelElbowPlumbing")
L_SedIChannelHorPipe := L_Sed - S_Fitting - ConRadius(ND_SedInletChannelDrain) - ElbowRadius(ND_SedInletChannelDrain) + SocketDepth(ND_SedInletChannelDrain) + max(T_PlantWall - CouplingLength(ND_SedInletChannelDrain), 0 m) - max(CouplingLength(ND_SedInletChannelDrain) - T_PlantWall, 0 m)
SedIChannelHorPipeLayer := layer_new("SedIChannelHorPipePlumbing", blue)
SedIChannelHorPipe := PipeSUBF(SedIChannelDrainVertCoupling_Origin + [
    ElbowRadius(ND_SedInletChannelDrain);
    0 m;
    -L_SedIChannelVertPipe - ElbowRadius(ND_SedInletChannelDrain)
], L_SedIChannelHorPipe, [0; 180; 0]*deg, ND_SedInletChannelDrain, PS_Default, ["SedTankCon"])
SedIChannelHorPipeFrz := FreezeLayer("SedIChannelHorPipePlumbing")
SedIChannelHorCouplingLayer := layer_new("SedIChannelHorCouplingPlumbing", green)
SedIChannelHorCoupling := CouplingSUBF(SedIChannelDrainVertCoupling_Origin + [
    ElbowRadius(ND_SedInletChannelDrain) + L_SedIChannelHorPipe;
    0 m;
    -L_SedIChannelVertPipe - ElbowRadius(ND_SedInletChannelDrain)
], [0; 180; 0]*deg, ND_SedInletChannelDrain, PS_Default, ["SedTankCon"])
SedIChannelHorCouplingFrz := FreezeLayer("SedIChannelHorCouplingPlumbing")
SedInletDrainScript := stack(SedIChannelDrainVertCouplingLayer, SedIChannelDrainVerCoupling, SedIChannelVertCouplingFrz, SedIChannelDrainSubCyl, SedGroupSubCyl, SedChannelCylSub, SedIChannelDrainVertPipeLayer, SedIChannelDrainVertPipe, SedIChannelVertPipeFrz, SedIChannelElbowLayer, SedIChannelDrainElbow, SedIChannelElbowFrz, SedIChannelHorPipeLayer, SedIChannelHorPipe, SedIChannelHorPipeFrz, SedIChannelHorCouplingLayer, SedIChannelHorCoupling, SedIChannelHorCouplingFrz)
# Exit Channel Drain
SedEChannelDrainVertCoupling_Origin := [
    Plant_Origin[0] - W_SedExitChannel + S_Fitting + ConRadius(ND_SedExitChannelDrain);
    Plant_Origin[1] + L_SedChannel - S_Fitting - ConRadius(ND_SedInletChannelDrain);
    Plant_Origin[2] + Z_SedChannelBottom - CouplingLength(ND_SedInletChannelDrain) + SocketDepth(ND_SedInletChannelDrain)
]
SedEChannelDrainVertCouplingLayer := layer_new("SedEChannelVertCouplingPlumbing", green)
SedEChannelDrainVerCoupling := CouplingSUBF(SedEChannelDrainVertCoupling_Origin, [0; 90; 0]*deg, ND_SedExitChannelDrain, PS_Default, ["SedChannelsCon"])
SedEChannelVertCouplingFrz := FreezeLayer("SedIChanneEVertCouplingPlumbing")
L_SedEChannelVertPipe := Z_SedChannelBottom - CouplingLength(ND_SedExitChannelDrain) - ElbowRadius(ND_SedExitChannelDrain) - ConRadius(ND_SedExitChannelDrain) + SocketDepth(ND_SedExitChannelDrain)
SedEChannelDrainSubCyl := CylinderF(SedEChannelDrainVertCoupling_Origin, outerradius(ND_SedExitChannelDrain), L_SedEChannelVertPipe, [0; 270]*deg)
SedEChannelDrainVertPipeLayer := layer_new("SedEChannelVertPipePlumbing", blue)
SedEChannelDrainVertPipe := PipeSUBF(SedEChannelDrainVertCoupling_Origin, L_SedEChannelVertPipe, [0; 270; 0]*deg, ND_SedExitChannelDrain, PS_Default, ["SedTankCon"])
SedEChannelVertPipeFrz := FreezeLayer("SedEChannelVertPipePlumbing")
SedEChannelElbowLayer := layer_new("SedEChannelElbowPlumbing", green)
SedEChannelDrainElbow := ElbowSUBF(SedEChannelDrainVertCoupling_Origin + [0 m; 0 m; -L_SedIChannelVertPipe], [180; 0; 90]*deg, ND_SedExitChannelDrain, PS_Default, ["SedTankCon"])
SedEChannelElbowFrz := FreezeLayer("SedEChannelElbowPlumbing")
L_SedEChannelHorPipe :=
    -SedEChannelDrainVertCoupling_Origin[0] + T_PlantWall - ElbowRadius(ND_SedExitChannelDrain) - CouplingLength(ND_SedExitChannelDrain) + SocketDepth(ND_SedExitChannelDrain) if -SedEChannelDrainVertCoupling_Origin[0] + T_PlantWall - ElbowRadius(ND_SedExitChannelDrain) - SocketDepth(ND_SedExitChannelDrain) > CouplingLength(ND_SedExitChannelDrain)
    -SedEChannelDrainVertCoupling_Origin[0] + T_PlantWall - ElbowRadius(ND_SedExitChannelDrain) otherwise
SedEChannelHorPipeLayer := layer_new("SedEChannelHorPipePlumbing", blue)
SedEChannelHorPipe := PipeSUBF(SedEChannelDrainVertCoupling_Origin + [
    ElbowRadius(ND_SedExitChannelDrain);
    0 m;
    -L_SedEChannelVertPipe - ElbowRadius(ND_SedExitChannelDrain)
], L_SedEChannelHorPipe, [0; 180; 0]*deg, ND_SedExitChannelDrain, PS_Default, ["SedTankCon"])
SedEChannelHorPipeFrz := FreezeLayer("SedEChannelHorPipePlumbing")
SedEChannelHorCouplingLayer := layer_new("SedEChannelHorCouplingPlumbing", green)
SedEChannelHorCoupling := CouplingSUBF(SedEChannelDrainVertCoupling_Origin + [
    ElbowRadius(ND_SedExitChannelDrain) + L_SedEChannelHorPipe;
    0 m;
    -L_SedEChannelVertPipe - ElbowRadius(ND_SedExitChannelDrain)
], [0; 180; 0]*deg, ND_SedExitChannelDrain, PS_Default, ["SedTankCon"])
SedEChannelHorCouplingFrz := FreezeLayer("SedEChannelHorCouplingPlumbing")
SedExitDrainScript :=
    stack(SedEChannelDrainVertCouplingLayer, SedEChannelDrainVerCoupling, SedEChannelVertCouplingFrz, SedEChannelDrainSubCyl, SedGroupSubCyl, SedChannelCylSub, SedEChannelDrainVertPipeLayer, SedEChannelDrainVertPipe, SedEChannelVertPipeFrz, SedEChannelElbowLayer, SedEChannelDrainElbow, SedEChannelElbowFrz) if L_SedEChannelHorPipe ≤ SocketDepth(ND_SedExitChannelDrain)
    stack(SedEChannelDrainVertCouplingLayer, SedEChannelDrainVerCoupling, SedEChannelVertCouplingFrz, SedEChannelDrainSubCyl, SedEChannelDrainVertPipeLayer, SedEChannelDrainVertPipe, SedEChannelVertPipeFrz, SedEChannelElbowLayer, SedEChannelDrainElbow, SedEChannelElbowFrz, SedEChannelHorPipeLayer, SedEChannelHorPipe, SedEChannelHorPipeFrz, SedEChannelHorCouplingLayer, SedEChannelHorCoupling, SedEChannelHorCouplingFrz) if -SedEChannelDrainVertCoupling_Origin[0] - ElbowRadius(ND_SedExitChannelDrain) + T_PlantWall ≥ CouplingLength(ND_SedExitChannelDrain)
    stack(SedEChannelDrainVertCouplingLayer, SedEChannelDrainVerCoupling, SedEChannelVertCouplingFrz, SedEChannelDrainSubCyl, SedEChannelDrainVertPipeLayer, SedEChannelDrainVertPipe, SedEChannelDrainVertPipeLayer, SedEChannelDrainVertPipe, SedEChannelVertPipeFrz, SedEChannelElbowLayer, SedEChannelDrainElbow, SedEChannelElbowFrz, SedEChannelHorPipeLayer, SedEChannelHorPipe, SedEChannelHorPipeFrz) otherwise
    = [
        "-layer m SedEChannelVertCouplingPlumbing";
        "c t 0,255,0";
        "SedEChannelVertCouplingPlumbing";
        "  ";
        "_zoom w -0.25921,4.3084,1.63658 -0.03919,4.43,1.53498";
        "_cylinder -0.1492,4.3692,1.58578 0.0508 c -0.1032,4.3692,1.58578";
        "_cylinder -0.20321,4.3692,1.58578 0.0508 c -0.15721,4.3692,1.58578";
        "_cylinder -0.15721,4.3692,1.58578 0.04445 c -0.1492,4.3692,1.58578";
        "_union -0.1032,4.3184,1.58578 -0.20321,4.3184,1.58578 -0.1492,4.32475,1.58578 ";
        "rotate3d l  y -0.1492,4.3692,1.58578 90"
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    ]
# Fill in Holes at Channel Ends
SelectSedTankLayer := SelectLayer("SedTankCon")
SedIChannelFlocEnd := BoxF([
    Plant_Origin[0] - L_Sed + W_SedInletChannelPreWeir;
    Plant_Origin[1] + L_SedChannel;
    Plant_Origin[2] + Z_SedChannelBottom
], [
    Plant_Origin[0] - L_Sed + W_SedInletChannelPreWeir;
    Plant_Origin[1] + L_SedChannel;
    Plant_Origin[2] + Z_SedChannelBottom
] + [W_SedInletChannel - W_SedInletChannelPreWeir; T_PlantWall; H_SedInletChannel], [0; 0; 0]*deg)
SedIChannelFiltEnd := BoxF([Plant_Origin[0] - L_Sed; Plant_Origin[1] - T_PlantWall; Plant_Origin[2] + Z_SedChannelBottom], [Plant_Origin[0] - L_Sed; Plant_Origin[1] - T_PlantWall; Plant_Origin[2] + Z_SedChannelBottom] + [W_SedInletChannel; T_PlantWall; H_SedInletChannel], [0; 0; 0]*deg)
SedEChannelFlocEnd := BoxF([
    Plant_Origin[0] - W_SedExitChannel;
    Plant_Origin[1] + L_SedChannel;
    Plant_Origin[2] + Z_SedChannelBottom
], [
    Plant_Origin[0] - W_SedExitChannel;
    Plant_Origin[1] + L_SedChannel;
    Plant_Origin[2] + Z_SedChannelBottom
] + [W_SedExitChannel; T_PlantWall; H_SedExitChannel], [0; 0; 0]*deg)
SedEChannelFiltEnd := BoxF([
    Plant_Origin[0] - W_SedExitChannel;
    Plant_Origin[1] - T_PlantWall;
    Plant_Origin[2] + Z_SedChannelBottom
], [
    Plant_Origin[0] - W_SedExitChannel;
    Plant_Origin[1] - T_PlantWall;
    Plant_Origin[2] + Z_SedChannelBottom
] + [W_SedExitChannelPreWeir + T_SedWeir; T_PlantWall; H_SedExitChannel], [0; 0; 0]*deg)
UnionSedChannelEnds := Union_All
SedChannelEndScript := stack(SelectSedTankLayer, SedIChannelFlocEnd, SedIChannelFiltEnd, SedEChannelFlocEnd, SedEChannelFiltEnd, UnionSedChannelEnds, FreezeSedTank)
AC_SedTank :=
    stack(SedTankScript, SedChannelScript, SedDrainCoverScript, SedManifoldScript, SedLaunderScript, SedHopperDrainScript, SedSludgeScript, SedPipeFrameScript, SedTankLaminaScript, SedDiffuserScript, SedChannelWeirScript, SedInletDrainScript, SedExitDrainScript, SedChannelEndScript) if N_SedBays == 1 and N_SedTanks == 1
    stack(SedTankScript, SedChannelScript, SedDrainCoverScript, SedManifoldScript, SedLaunderScript, SedHopperDrainScript, SedSludgeScript, SedPipeFrameScript, SedTankLaminaScript, SedDiffuserScript, ThawAllSed, FreezeSedFrameTank, ArraySedBay, FreezeAllSed, SedChannelWeirScript, SedInletDrainScript, SedExitDrainScript, SedChannelEndScript) if N_SedBays > 1 and N_SedTanks == 1
    stack(SedTankScript, SedChannelScript, SedDrainCoverScript, SedManifoldScript, SedLaunderScript, SedHopperDrainScript, SedSludgeScript, SedPipeFrameScript, SedTankLaminaScript, SedDiffuserScript, ThawAllSed, ArraySedTank, FreezeAllSed, SedChannelWeirScript, SedInletDrainScript, SedExitDrainScript, SedChannelEndScript) if N_SedTanks > 1 and N_SedBays == 1
    stack(SedTankScript, SedChannelScript, SedDrainCoverScript, SedManifoldScript, SedLaunderScript, SedHopperDrainScript, SedSludgeScript, SedPipeFrameScript, SedTankLaminaScript, SedDiffuserScript, ThawAllSed, FreezeSedFrameTank, ArraySedBay, ThawAllSed, ArraySedTank, FreezeAllSed, SedChannelWeirScript, SedInletDrainScript, SedExitDrainScript, SedChannelEndScript) otherwise
# [component: inputs AC_SedTank]
