# Sedimentation Tank Drawing
# Sedimentation Tank Concrete
# Side Slopes and Launder Support Ledge
SedTankLayer := layer_new("SedTankCon", grey)
SelectSedCon := SelectLayer("SedTankCon")
SedSlopePolyline := Pline([
    [Plant_Origin[1] + W_Sed; Plant_Origin[2]] + [T_ConcreteMin; 0 m];
    [Plant_Origin[1] + W_Sed; Plant_Origin[2]] + [-W_SedBay/2 + W_SedSludge/2; 0 m];
    [Plant_Origin[1] + W_Sed; Plant_Origin[2]] + [-W_SedBay/2 + W_SedSludge/2; H_SedSludge];
    [Plant_Origin[1] + W_Sed; Plant_Origin[2]] + [-W_SedBay/2 + W_SedSludge/2 + T_SedDrainCoverLedge; H_SedSludge];
    [Plant_Origin[1] + W_Sed; Plant_Origin[2]] + [-W_SedBay/2 + W_SedSludge/2 + T_SedDrainCoverLedge; H_SedSludge + H_SedDrainCoverTotal];
    [Plant_Origin[1] + W_Sed; Plant_Origin[2]] + [0 m; Z_SedSideSlopes];
    [Plant_Origin[1] + W_Sed; 0 m] + [T_ConcreteMin; Z_SedSideSlopes];
    [Plant_Origin[1] + W_Sed; 0 m] + [T_ConcreteMin; 0 m]
])
ExtrudeSedSlopes := extrude([Plant_Origin[1] + W_Sed; Plant_Origin[2]], -L_Sed)
MirrorSedSlopes := MirrorLast([Plant_Origin[1] + W_Sed - W_SedBay/2; Plant_Origin[2]], [Plant_Origin[1] + W_Sed - W_SedBay/2; Plant_Origin[2] + zc], "n")
SedLaunderLedge := BoxF([0; W_Sed; Z_SedLaunder - ConRadius(ND_SedLaunder)] + Plant_Origin, [
    -2*SocketDepth(ND_SedLaunder);
    W_Sed - W_SedBay;
    Z_SedLaunder - ConRadius(ND_SedLaunder) - T_ConcreteMin
] + Plant_Origin, [0; 0; 0]*deg)
SedSlopeLedgeScript := stack(SedTankLayer, view("r"), SedSlopePolyline, view("r"), ExtrudeSedSlopes, MirrorSedSlopes, view("t"), SedLaunderLedge)
# Inlet and Exit Channels
ChannelVertBox := BoxF([-L_Sed + W_SedInletChannel + W_SedExitChannel + T_SedWeir; W_Sed; Z_SedChannelBottom] + Plant_Origin, [-L_Sed + W_SedInletChannel + W_SedExitChannel + T_SedWeir + T_ChannelWall; W_Sed - W_SedBay; H_Sed] + Plant_Origin, [0; 0; 0]*deg)
ChannelHorizBox := BoxF([-L_Sed; W_Sed; Z_SedChannelBottom] + Plant_Origin, [
    -L_Sed + W_SedExitChannel + T_SedWeir + W_SedInletChannel + T_ChannelWall;
    W_Sed - W_SedBay;
    Z_SedChannelBottom - T_ChannelWall
] + Plant_Origin, [0; 0; 0]*deg)
ArraySedBay := Array_All(N_SedBays, 1, -W_SedBay)
SedChannelScript := stack(ChannelVertBox, ChannelHorizBox, ArraySedBay)
# Short Wall Between Bays to Support Plates
# Note: The center ledge should be removed from the stack if the lamella pipe frame and it's support posts are drawn.
SedCenterLedge := BoxF([Plant_Origin[0]; Plant_Origin[1] + W_Sed - W_SedBay + T_ConcreteMin; Plant_Origin[2]], [Plant_Origin[0] - L_Sed; Plant_Origin[1] + W_Sed - W_SedBay - T_ConcreteMin; Z_SedLamellaBottom], [0; 0; 0]*deg)
ArraySedCenterLedge := ArrayLast(N_SedBays - 1, 1, -W_SedBay)
SedCenterLedgeScript := stack(SedCenterLedge, ArraySedCenterLedge)
[Plant_Origin[0] + L_Sed - L_SedHopperOffset; Plant_Origin[2]]
# Floc Hopper Front and Back Slopes
SedHopperNoOffsetFlat := [
    [Plant_Origin[0] + L_Sed; Plant_Origin[2]];
    [Plant_Origin[0] + L_Sed - L_SedHopper; Plant_Origin[2]];
    [Plant_Origin[0] + L_Sed - L_SedHopper; Z_SedManifoldPipe];
    [Plant_Origin[0] + L_Sed - L_SedHopper + T_ConcreteMin; Z_SedManifoldPipe];
    [Plant_Origin[0] + L_Sed - L_SedHopper + T_ConcreteMin; Z_SedHopperFrontSlope];
    [
        L_SedHopperFrontSlope + (Plant_Origin[0] + L_Sed - L_SedHopper + T_ConcreteMin);
        Z_SedHopperIntersect
    ];
    [Plant_Origin[0] + L_Sed; Z_SedHopperBackSlope];
    [Plant_Origin[0] + L_Sed; Plant_Origin[2]]
]
SedHopperOffsetFlat := [
    [Plant_Origin[0] + L_Sed; Plant_Origin[2]];
    [Plant_Origin[0] + L_Sed - L_SedHopper; Plant_Origin[2]];
    [Plant_Origin[0] + L_Sed - L_SedHopper; Z_SedManifoldPipe];
    [Plant_Origin[0] + L_Sed - L_SedHopper + T_ConcreteMin; Z_SedManifoldPipe];
    [Plant_Origin[0] + L_Sed - L_SedHopper + T_ConcreteMin; Z_SedHopperFrontSlope];
    [
        Plant_Origin[0] + L_Sed - L_SedHopper + T_ConcreteMin + L_SedHopperFrontSlope;
        Z_SedHopperFrontSlope
    ];
    [Plant_Origin[0] + L_Sed - L_SedHopperOffset; Z_SedHopperBackSlope];
    [Plant_Origin[0] + L_Sed; Z_SedHopperBackSlope];
    [Plant_Origin[0] + L_Sed; Plant_Origin[2]]
]
SedHopperOffsetPeak := [
    [Plant_Origin[0] + L_Sed; Plant_Origin[2]];
    [Plant_Origin[0] + L_Sed - L_SedHopperOffset; Plant_Origin[2]];
    [Plant_Origin[0] + L_Sed - L_SedHopper; Plant_Origin[2]];
    [Plant_Origin[0] + L_Sed - L_SedHopper; Z_SedManifoldPipe];
    [Plant_Origin[0] + L_Sed - L_SedHopper + T_ConcreteMin; Z_SedManifoldPipe];
    [-X_SedHopperBottom; Z_SedHopperIntersect];
    [Plant_Origin[0] + L_Sed; Z_SedHopperBackSlope];
    [Plant_Origin[0] + L_Sed; Plant_Origin[2]]
]
SedHopperNoOffsetPeak := [
    [Plant_Origin[0] + L_Sed; Plant_Origin[2]];
    [Plant_Origin[0] + L_Sed - L_SedHopper; Plant_Origin[2]];
    [Plant_Origin[0] + L_Sed - L_SedHopper; Z_SedManifoldPipe];
    [Plant_Origin[0] + L_Sed - L_SedHopper + T_ConcreteMin; Z_SedManifoldPipe];
    [-X_SedHopperBottom; Z_SedHopperIntersect];
    [Plant_Origin[0] + L_Sed; Z_SedHopperBackSlope];
    [Plant_Origin[0] + L_Sed; Plant_Origin[2]]
]
SedHopperPlineMatrix :=
    SedHopperNoOffsetFlat if L_SedHopperOffset ≤ 0 and L_SedHopper - L_SedHopperBackSlopeMax - L_SedHopperOffset - T_ConcreteMin > L_SedHopperFrontSlopeMax
    SedHopperNoOffsetPeak if L_SedHopperOffset ≤ 0 and L_SedHopper - L_SedHopperBackSlopeMax - L_SedHopperOffset - T_ConcreteMin ≤ L_SedHopperFrontSlopeMax
    SedHopperOffsetFlat if L_SedHopperOffset > 0 and L_SedHopper - L_SedHopperBackSlopeMax - L_SedHopperOffset - T_ConcreteMin > L_SedHopperFrontSlopeMax
    SedHopperOffsetPeak otherwise
SedHopperFrontBack := Pline(SedHopperPlineMatrix)
ExtrudeSedHopperFrontBack := ExtrudeLast(W_Sed)
MoveSedHopperFrontBack := MoveLast(Plant_Origin, Plant_Origin + [0 m; W_Sed; 0 m])
SedHopperFrontBackSlopeScript := stack(view("ba"), SedHopperFrontBack, view("ba"), ExtrudeSedHopperFrontBack, view("t"))
# Tank Walls and Manifold Ledge
DrawSedTank := Tank(Plant_Origin, [L_Sed; W_Sed; H_Sed], T_PlantWall)
SedManifoldLedge := BoxF([Plant_Origin[0]; Plant_Origin[1]; Z_SedManifoldPipe - ConRadius(ND_SedManifold)], [
    Plant_Origin[0] - SocketDepth(ND_SedManifold) - CapThickness(ND_SedManifold);
    W_Sed + Plant_Origin[1];
    Z_SedManifoldPipe - ConRadius(ND_SedManifold) - T_ConcreteMin
], [0; 0; 0]*deg)
FreezeSedTank := FreezeLayer("SedTankCon")
SedTankWallScript := stack(DrawSedTank, SedManifoldLedge)
# Lamella Support Ledges
SedLowerLedge := BoxF([Plant_Origin[0] - L_SedUpflow - L_SedPlateUnderChan; Plant_Origin[1]; Z_SedLamellaBottom], [Plant_Origin[0]; Plant_Origin[1] + T_ConcreteMin; Z_SedLamellaBottom - T_ConcreteMin], [0; 0; 0]*deg)
SedUpperLedge := BoxF([Plant_Origin[0] - L_SedUpflow - L_SedPlateUnderChan; Plant_Origin[1] + W_Sed; Z_SedLamellaBottom], [Plant_Origin[0]; Plant_Origin[1] + W_Sed - T_ConcreteMin; Z_SedLamellaBottom - T_ConcreteMin], [0; 0; 0]*deg)
SedPlateSupportLedgeScript := stack(SedLowerLedge, SedUpperLedge, Union_All, FreezeSedTank)
# Inlet Manifold Rest Cutout
SedManifoldRestCutout := CylinderF([X_SedHopperBottom; Plant_Origin[1] + W_Sed - W_SedBay/2; Z_SedManifoldPipe], outerradius(ND_SedManifold), (Z_SedManifoldPipe - Z_SedHopperBottom)/tan(AN_SedHopperSlope) + T_ConcreteMin + zc, [180; 0; 0]*deg)
SubtractSedConCutouts := SubtractF(["SedTankCon"], "DeleteMe")
SedManifoldRestScript := stack(SedManifoldRestCutout, ArraySedBay, GroupDelete, SubtractSedConCutouts)
SedConScript :=
    stack(SedSlopeLedgeScript, SedChannelScript, SedHopperFrontBackSlopeScript, SedTankWallScript, SedPlateSupportLedgeScript, SedManifoldRestScript) if N_SedBays == 1
    stack(SedSlopeLedgeScript, SedChannelScript, SedCenterLedgeScript, SedHopperFrontBackSlopeScript, SedTankWallScript, SedPlateSupportLedgeScript, SedManifoldRestScript) otherwise
# Sludge Drain Cover
SedDrainCoverLayer := layer_new("SedDrainCoverCon", ltgrey)
SedDrainCoverPline := Pline3D([
    [
        Plant_Origin[0];
        Plant_Origin[1] + W_Sed - (W_SedBay + W_SedDrainCover)/2;
        Plant_Origin[2] + H_SedSludge
    ];
    [
        Plant_Origin[0];
        Plant_Origin[1] + W_Sed - (W_SedBay + W_SedDrainCover)/2;
        Plant_Origin[2] + H_SedSludge + H_SedDrainCoverTotal
    ];
    [
        Plant_Origin[0];
        Plant_Origin[1] + W_Sed - W_SedBay/2 - outerradius(ND_SedJetReverser);
        T_ConcreteMin + outerradius(ND_SedJetReverser) + H_SedSludge
    ];
    [
        Plant_Origin[0];
        Plant_Origin[1] + W_Sed - W_SedBay/2 + outerradius(ND_SedJetReverser);
        T_ConcreteMin + outerradius(ND_SedJetReverser) + H_SedSludge
    ];
    [
        Plant_Origin[0];
        Plant_Origin[1] + W_Sed - (W_SedBay - W_SedDrainCover)/2;
        Plant_Origin[2] + H_SedSludge + H_SedDrainCoverTotal
    ];
    [
        Plant_Origin[0];
        Plant_Origin[1] + W_Sed - (W_SedBay - W_SedDrainCover)/2;
        Plant_Origin[2] + H_SedSludge
    ];
    [
        Plant_Origin[0];
        Plant_Origin[1] + W_Sed - (W_SedBay + W_SedDrainCover)/2;
        Plant_Origin[2] + H_SedSludge
    ]
])
# viewfront1
ExtrudeSedDrainCover := extrude([
    Plant_Origin[1] + W_Sed - W_SedBay/2 - outerradius(ND_SedJetReverser);
    T_ConcreteMin + outerradius(ND_SedJetReverser) + H_SedSludge
], -L_SedDrainCoverSegment)
# viewtop1
SedDrainCoverBox := BoxF(Plant_Origin + [0; W_Sed - (W_SedBay + W_SedDrainCover)/2; H_SedSludge], Plant_Origin + [0; W_Sed - (W_SedBay + W_SedDrainCover)/2; H_SedSludge] + [-L_SedDrainCoverSegment; W_SedDrainCover; H_SedDrainCoverTotal], [0; 0; 0]*deg)
FreezeSedDrainCover := FreezeLayer("SedDrainCoverCon")
SedJetRedirect := CylinderF([0 m; W_Sed - W_SedBay/2; H_SedSludge + T_ConcreteMin + outerradius(ND_SedJetReverser)] + Plant_Origin, outerradius(ND_SedJetReverser), L_SedDrainCoverSegment + zc, [0; 0]*deg)
N_SedDrainCoverSegmentOrifices
SedDrainCoverOrifices := CylinderF([-B_SedSludgeOrifices/2; W_Sed - W_SedBay/2; H_SedSludge + H_SedDrainCoverTotal + zc] + Plant_Origin, D_SedSludgeOrifice/2, H_SedDrainCoverTotal + 2*zc, [0; 270]*deg)
ArraySedDrainOrifices := ArrayLast(1, N_SedDrainCoverSegmentOrifices, -B_SedSludgeOrifices)
GroupSedDrainCuts := GroupAll("DeleteMe")
SubtractSedDrainCuts := SubtractF(["SedDrainCoverCon"], "DeleteMe")
ThawSedDrainCover := SelectLayer("SedDrainCoverCon")
ArraySedDrainCover := ArrayLast(1, N_SedDrainCover, -L_SedDrainCoverSegment - S_SedDrainCoverSegment)
SedDrainCoverScript :=
    stack(SedDrainCoverLayer, SedDrainCoverBox, FreezeSedDrainCover, SedJetRedirect, SedDrainCoverOrifices, ArraySedDrainOrifices, GroupSedDrainCuts, SubtractSedDrainCuts, ThawSedDrainCover, ArraySedDrainCover, FreezeSedDrainCover) if W_SedDrainCover == outerdiameter(ND_SedJetReverser)
    stack(SedDrainCoverLayer, SedDrainCoverPline, view("r"), ExtrudeSedDrainCover, view("t"), FreezeSedDrainCover, SedJetRedirect, SedDrainCoverOrifices, ArraySedDrainOrifices, GroupSedDrainCuts, SubtractSedDrainCuts, ThawSedDrainCover, ArraySedDrainCover, FreezeSedDrainCover) otherwise
# Start Inlet Manifold
# Origins and Dimensions
SedManPipe_Origin := [
    Plant_Origin[0] - L_SedUpflow - T_ConcreteMin - ConRadius(ND_SedManifold)/tan(AN_SedHopperSlope) - SocketDepth(ND_SedManifold);
    Plant_Origin[1] + W_Sed - W_SedBay/2;
    Z_SedManifoldPipe
]
L_SedMan45VertSpaceMaxCoupling := Z_SedChannelBottom - Z_SedManifoldPipe - CouplingLength(ND_SedManifold) - SocketDepth(ND_SedManifold)
L_SedMan45VertSpaceNoCoupling := Z_SedChannelBottom - Z_SedManifoldPipe - SocketDepth(ND_SedManifold)
L_SedMan45HorizSpaceMax := SedManPipe_Origin[0] - (Plant_Origin[0] - L_Sed + S_Fitting + ConRadius(ND_SedManifold))
L_SedMan45HorizSpaceMin := SedManPipe_Origin[0] - (Plant_Origin[0] - L_Sed + W_SedInletChannelPreWeir - S_Fitting - ConRadius(ND_SedManifold))
X_SedManStub :=
    SedManPipe_Origin[0] - L_SedMan45VertSpaceNoCoupling if L_SedMan45HorizSpaceMin ≤ L_SedMan45VertSpaceNoCoupling ≤ L_SedMan45HorizSpaceMax
    SedManPipe_Origin[0] - L_SedMan45HorizSpaceMin otherwise
SedManElbow2_Origin := SedManPipe_Origin
SedMan45Pipe_Origin := [
    SedManPipe_Origin[0] - ElbowRadius(ND_SedManifold)/sqrt(2);
    SedManPipe_Origin[1];
    SedManPipe_Origin[2] + ElbowRadius(ND_SedManifold) - ElbowRadius(ND_SedManifold)/sqrt(2)
]
L_SedMan45Pipe := sqrt(2)*(SedManPipe_Origin[0] - X_SedManStub - ElbowRadius(ND_SedManifold))
SedManCap_Origin := SedManPipe_Origin + [L_SedManifoldPipe; 0 m; 0 m]
# Manifold Pipes
SedPipeLayer := layer_new("SedPipePlu", blue)
SelectSedPipes := SelectLayer("SedPipePlu")
SedPipeFrz := FreezeLayer("SedPipePlu")
SedRemovableLayer := layer_new("SedRemovablePlu", red)
SelectSedRemovables := SelectLayer("SedRemovablePlu")
SedRemovableFrz := FreezeLayer("SedRemovablePlu")
SedMan45Pipe := PipeF(SedMan45Pipe_Origin, L_SedMan45Pipe, [0; 45; 0]*deg, ND_SedManifold, PS_Default)
SedManPipe := PipeF(SedManPipe_Origin, L_SedManifoldPipe, [0; 180]*deg, ND_SedManifold, PS_Default)
SedManStopper := PipeF([
    X_SedManStub;
    Plant_Origin[1] + W_Sed - W_SedBay/2;
    Z_SedChannelBottom - SocketDepth(ND_SedManifold)
], H_SedInletChannel + SocketDepth(ND_SedManifold), [0; 90]*deg, ND_SedManifold, PS_Default)
SedManPipeScript := stack(SedPipeLayer, SedMan45Pipe, SedManPipe, SedPipeFrz, SedRemovableLayer, SedManStopper, SedRemovableFrz)
# Manifold Fittings
SedFittingLayer := layer_new("SedFittingPlu", green)
SelectSedFittings := SelectLayer("SedFittingPlu")
SedFittingFrz := FreezeLayer("SedFittingPlu")
SedManElbow2 := Elbow45F(SedManElbow2_Origin, [90; 0; 270]*deg, ND_SedManifold, PS_Default)
SedManCap := CapF(SedManCap_Origin, [0; 0; 0]*deg, ND_SedManifold)
SedManFittingScript := stack(SedFittingLayer, SedManElbow2, SedManCap, SedFittingFrz)
# Manifold Orifices
SedManOrifice := CylinderF([
    Plant_Origin[0] - L_Sed + L_SedHopper + L_SedDiffuserOutlet/2 + T_SedDiffuserWall;
    SedManPipe_Origin[1];
    SedManPipe_Origin[2]
], D_SedManifoldPort/2, ND_SedManifold, [0; 270]*deg)
ArraySedManOrifice := array_all(1, N_SedManifoldPorts, B_SedManifoldPort)
SubtractFromSedPipes := SubtractF(["SedPipePlu"], "DeleteMe")
SubtractFromSedFittings := SubtractF(["SedFittingPlu"], "DeleteMe")
SedManOrificeScript := stack(SedManOrifice, ArraySedManOrifice, GroupDelete, SubtractFromSedPipes, SedManOrifice, ArraySedManOrifice, GroupDelete, SubtractFromSedFittings)
SedManifoldScript := stack(SedManPipeScript, SedManFittingScript, SedManOrificeScript)
# Start Exit Launder
# Origins and Dimensions
SedLaunderPipe_Origin :=
    if T_ChannelWall > CouplingLength(ND_SedLaunder)
        [
            Plant_Origin[0] - L_SedChannelToWall + max(0 m, 2*CouplingLength(ND_SedLaunder) - T_ChannelWall) - SocketDepth(ND_SedLaunder);
            Plant_Origin[1] + W_Sed - W_SedBay/2;
            Z_SedLaunder
        ]
    otherwise
        [
            Plant_Origin[0] - L_SedChannelToWall - T_ChannelWall + CouplingLength(ND_SedLaunder) - SocketDepth(ND_SedLaunder);
            Plant_Origin[1] + W_Sed - W_SedBay/2;
            Z_SedLaunder
        ]
SedLaunderCap_Origin := SedLaunderPipe_Origin + [L_SedLaunder; 0 m; 0 m]
# Launder Fittings
SedLaunderEndCap := CapF(SedLaunderCap_Origin, [0; 0]*deg, ND_SedLaunder)
SedLaunderPlugCap := CapF([
    Plant_Origin[0] - L_SedChannelToWall - T_ChannelWall - CapHeight(ND_SedLaunder) + CapThickness(ND_SedLaunder);
    Plant_Origin[1] + W_Sed - W_SedBay/2;
    Z_SedLaunder
], [180; 0]*deg, ND_SedLaunder)
SedLaunderFittingScript := stack(SelectSedFittings, SedLaunderEndCap, SedFittingFrz, SelectSedRemovables, SedLaunderPlugCap, SedRemovableFrz)
# Launder Pipes
SedLaunderPipe := PipeF(SedLaunderPipe_Origin, L_SedLaunder, [0; 180]*deg, ND_SedLaunder, PS_Default)
SedLaunderPlugNipple := PipeF([
    Plant_Origin[0] - L_SedChannelToWall - T_ChannelWall + L_SedLaunderCapExcess;
    Plant_Origin[1] + W_Sed - W_SedBay/2;
    Z_SedLaunder
], CapHeight(ND_SedLaunder) - CapThickness(ND_SedLaunder) + L_SedLaunderCapExcess, [0; 0]*deg, ND_SedLaunder, PS_Default)
SedLaunderPipeScript := stack(SelectSedPipes, SedLaunderPipe, SedPipeFrz, SelectSedRemovables, SedLaunderPlugNipple, SedRemovableFrz)
# Launder Orifices
SedLaunderOrifice := CylinderF([SocketDepth(ND_SedLaunder) + 1/2*B_SedLaunderOrifices; 0 m; 0 m] + SedLaunderPipe_Origin, D_SedLaunderOrifice/2, ND_SedLaunder, [0; 90]*deg)
ArraySedLaunderOrifices := array_all(1, N_SedLaunderOrifices, B_SedLaunderOrifices)
SedLaunderOrificeScript := stack(SedLaunderOrifice, ArraySedLaunderOrifices, GroupDelete, SubtractFromSedPipes, SedLaunderOrifice, ArraySedLaunderOrifices, GroupDelete, SubtractFromSedFittings)
SedLaunderStartScript := stack(SedLaunderFittingScript, SedLaunderPipeScript, SedLaunderOrificeScript)
# Start Floc Hopper Drain
# Origins
SedHopperDrainAdapter1_Origin := Plant_Origin + [
    -L_Sed - T_PlantWall - SocketDepth(ND_SedHopperDrain);
    W_Sed - W_SedBay/2;
    Z_SedHopperIntersect + outerradius(ND_SedHopperDrain)
]
SedHopperDrainValve_Origin := SedHopperDrainAdapter1_Origin + [
    -MaleAdapterLength(ND_SedHopperDrain) + ValveSocket(ND_SedHopperDrain) + SocketDepth(ND_SedHopperDrain);
    0 m;
    0 m
]
SedHopperDrainAdapter2_Origin := SedHopperDrainValve_Origin + [
    ValveSocket(ND_SedHopperDrain) - ValveLength(ND_SedHopperDrain) + SocketDepth(ND_SedHopperDrain) - MaleAdapterLength(ND_SedHopperDrain);
    0 m;
    0 m
]
SedHopperDrainElbow_Origin := SedHopperDrainAdapter2_Origin + [-2*SocketDepth(ND_SedHopperDrain); 0 m; 0 m]
# Hopper Drain Pipes
SedHopperDrainNipple1 := PipeF(SedHopperDrainAdapter1_Origin + [2*SocketDepth(ND_SedHopperDrain); 0; 0], 2*SocketDepth(ND_SedHopperDrain), [0; 0]*deg, ND_SedHopperDrain, PS_Default)
SedHopperDrainNipple2 := PipeF(SedHopperDrainAdapter2_Origin, 2*SocketDepth(ND_SedHopperDrain), [0; 0]*deg, ND_SedHopperDrain, PS_Default)
SedHopperDrainPipeScript := stack(SelectSedPipes, SedHopperDrainNipple1, SedHopperDrainNipple2, SedPipeFrz)
# Hopper Drain Fittings
SedValveLayer := layer_new("SedValvePlu", blue3)
SelectSedValves := SelectLayer("SedValvePlu")
SedValveFrz := FreezeLayer("SedValvePlu")
SedAdapterLayer := layer_new("SedAdapterPlu", blue2)
SelectSedAdapters := SelectLayer("SedAdapterPlu")
SedAdapterFrz := FreezeLayer("SedAdapterPlu")
SedHopperDrainElbow := ElbowF(SedHopperDrainElbow_Origin, [90; 0; 45]*deg, ND_SedHopperDrain, PS_Default)
SedHopperDrainAdapter1 := MaleAdapterF(SedHopperDrainAdapter1_Origin, [0; 0]*deg, ND_SedHopperDrain, PS_Default)
SedHopperDrainAdapter2 := MaleAdapterF(SedHopperDrainAdapter2_Origin, [180; 0]*deg, ND_SedHopperDrain, PS_Default)
SedHopperDrainValve := insertdwg("https://confluence.cornell.edu/download/attachments/173604905/Sed-Scaled-Gate-Valve-Threaded.dwg", SedHopperDrainValve_Origin, 2*outerradius(ND_SedHopperDrain)/(1.16 m), 2*outerradius(ND_SedHopperDrain)/(1.16 m), 0 deg)
SedHopperDrainFittingScript := stack(SedValveLayer, SedHopperDrainValve, SedValveFrz, SedAdapterLayer, SedHopperDrainAdapter1, SedHopperDrainAdapter2, SedAdapterFrz, SelectSedFittings, SedHopperDrainElbow, SedFittingFrz)
SedHopperDrainStartScript := stack(SedHopperDrainPipeScript, SedHopperDrainFittingScript)
# Start Sludge Drain Plumbing
# Origins and Dimensions
# the ten centimeters to ensure you can wrap your hand between two valves
L_SedSludgeValvePipe := -(SedHopperDrainElbow_Origin[0] - ElbowRadius(ND_SedHopperDrain) - ConRadius(ND_SedHopperDrain)) + (Plant_Origin[0] - L_Sed - T_PlantWall) + 10 cm
L_SedSludgeEmbeddedPipe := L_SedHopper + T_SedWeir + T_PlantWall - CouplingLength(ND_SedSludgePipe) + SocketDepth(ND_SedSludgePipe)
SedSludgeDrainAdapter1_Origin := Plant_Origin + [
    -L_Sed - T_PlantWall + SocketDepth(ND_SedSludgePipe) - L_SedSludgeValvePipe;
    W_Sed - W_SedBay/2;
    H_SedSludge - outerradius(ND_SedSludgePipe)
]
SedSludgeDrainValve_Origin := SedSludgeDrainAdapter1_Origin + [
    -MaleAdapterLength(ND_SedSludgePipe) + SocketDepth(ND_SedSludgePipe) + ValveSocket(ND_SedSludgePipe);
    0 m;
    0 m
]
# Sludge Drain Pipes
SedSludgeValvePipe := PipeF(SedSludgeDrainAdapter1_Origin, L_SedSludgeValvePipe, [180; 0]*deg, ND_SedSludgePipe, PS_Default)
SedSludgeDrainPipeScript := stack(SelectSedPipes, SedSludgeValvePipe, SedPipeFrz)
# Sludge Drain Fittings
SedSludgeDrainAdapter1 := MaleAdapterF(SedSludgeDrainAdapter1_Origin, [0; 0]*deg, ND_SedSludgePipe, PS_Default)
SedSludgeDrainValve := insertdwg("https://confluence.cornell.edu/download/attachments/173604905/Sed-Scaled-Gate-Valve-Threaded.dwg", SedSludgeDrainValve_Origin, 2*outerradius(ND_SedSludgePipe)/(1.16 m), 2*outerradius(ND_SedSludgePipe)/(1.16 m), 0 deg)
SedSludgeDrainFittingScript := stack(SelectSedAdapters, SedSludgeDrainAdapter1, SedAdapterFrz, SelectSedValves, SedSludgeDrainValve, SedValveFrz)
SedSludgeDrainStartScript := stack(SedSludgeDrainPipeScript, SedSludgeDrainFittingScript)
# Array Sed Bays
ThawSedBayArray := ThawMultiple(["SedPipePlu"; "SedFittingPlu"; "SedDrainCoverCon"; "SedAdapterPlu"; "SedValvePlu"; "SedRemovablePlu"])
FreezeSedBayArray := FreezeMultiple(["SedPipePlu"; "SedFittingPlu"; "SedDrainCoverCon"; "SedAdapterPlu"; "SedValvePlu"; "SedRemovablePlu"])
ArraySedBayScript := stack(ThawSedBayArray, ArraySedBay, FreezeSedBayArray)
# Lamella
# Origins and Dimensions
Lamina_Origin := [
    Plant_Origin[0] - cos(AN_SedPlate)*L_SedPlate;
    Plant_Origin[1] + W_Sed - W_SedBay;
    Z_SedLamellaBottom + Plant_Origin[2]
]
SedModCap_Origin := Lamina_Origin + [
    H_SedFrameStub/tan(AN_SedPlate) + cos(AN_SedPlate)^2*outerdiameter(ND_SedFrameStub) + ConRadius(ND_SedModulePipe)*cos(AN_SedPlate) + sin(AN_SedPlate)*(CapHeight(ND_SedModulePipe) - ConRadius(ND_SedModulePipe) + outerradius(ND_SedModulePipe));
    S_Fitting + ConRadius(ND_SedModulePipe);
    H_SedFrameStub + sin(AN_SedPlate)*cos(AN_SedPlate)*outerdiameter(ND_SedFrameStub) + ConRadius(ND_SedModulePipe)*sin(AN_SedPlate) - cos(AN_SedPlate)*(CapHeight(ND_SedModulePipe) - ConRadius(ND_SedModulePipe) + outerradius(ND_SedModulePipe))
]
SedModMirrorLineX := SedModCap_Origin[0] - (CapHeight(ND_SedModulePipe) - CapThickness(ND_SedModulePipe))*sin(AN_SedPlate) + (L_SedPlate - B_SedPlate*(N_SedModulePlates - 1)/tan(AN_SedPlate) - 2*(SedModCap_Origin[2] + (CapHeight(ND_SedModulePipe) - CapThickness(ND_SedModulePipe))*cos(AN_SedPlate) - Lamina_Origin[2])/sin(AN_SedPlate))*cos(AN_SedPlate)/2
SedModMirrorLineZ := SedModCap_Origin[2] + (CapHeight(ND_SedModulePipe) - CapThickness(ND_SedModulePipe))*cos(AN_SedPlate) + (L_SedPlate - B_SedPlate*(N_SedModulePlates - 1)/tan(AN_SedPlate) - 2*(SedModCap_Origin[2] + (CapHeight(ND_SedModulePipe) - CapThickness(ND_SedModulePipe))*cos(AN_SedPlate) - Lamina_Origin[2])/sin(AN_SedPlate))*sin(AN_SedPlate)/2
# Lamella
SedLaminaLayer := layer_new("SedModLamella", purple)
MakeSedLamina := BoxF(Lamina_Origin, Lamina_Origin + [-T_SedPlate; W_SedBay; L_SedPlate], [0; 90 deg - AN_SedPlate; 0])
ArraySedLamina := ArrayLast(1, N_SedModulePlates, -B_SedPlate/sin(AN_SedPlate))
SedLaminaFrz := FreezeLayer("SedModLamella")
SedLaminaScript := stack(SedLaminaLayer, MakeSedLamina, ArraySedLamina, SedLaminaFrz)
# Module Connector Caps
SedModCapLayer := layer_new("SedModCapPlu", red)
SedModCapRight := CapF(SedModCap_Origin, [0; 0; 0], ND_SedModulePipe)
SedModCapLeft := CapF(SedModCap_Origin - [
    B_SedPlate*(N_SedModulePlates - 1) + T_SedPlate + 2*(CapHeight(ND_SedModulePipe) - ConRadius(ND_SedModulePipe) + outerradius(ND_SedModulePipe));
    0 m;
    0 m
], [0; 180 deg; 0], ND_SedModulePipe)
SedModCapFrz := FreezeLayer("SedModCapPlu")
SedModCapScript := stack(SedModCapLayer, SedModCapRight, SedModCapLeft, SedModCapFrz)
# Module Connector Pipes and Spacers
SedModPipeLayer := layer_new("SedModPipePlu", blue3)
SedModPipe := PipeF(SedModCap_Origin, B_SedPlate*(N_SedModulePlates - 1) + T_SedPlate + 2*(CapHeight(ND_SedModulePipe) - ConRadius(ND_SedModulePipe) + outerradius(ND_SedModulePipe)), [0; 0; 0], ND_SedModulePipe, PS_Modules)
SedModPipeFrz := FreezeLayer("SedModPipePlu")
SedModSpacerLayer := layer_new("SedModSpacerPlu", blue)
SedModSpacers := PipeF(SedModCap_Origin - [CapHeight(ND_SedModulePipe) + T_SedPlate - CapThickness(ND_SedModulePipe); 0; 0], B_SedPlate - T_SedPlate, [0; 0; 0], ND_SedModulePipeSpacer, PS_Modules)
ArraySedModSpacers := ArrayLast(1, N_SedModulePlates - 1, -B_SedPlate)
SedModSpacerFrz := FreezeLayer("SedModSpacerPlu")
SedModPipeScript := stack(SedModPipeLayer, SedModPipe, SedModPipeFrz, SedModSpacerLayer, SedModSpacers, ArraySedModSpacers, SedModSpacerFrz)
# Rotate and Array Connectors and Array Modules
ThawSedModPiping := ThawMultiple(["SedMod*Plu"])
RotateSedModPiping := Rotate_All([SedModCap_Origin[0]; SedModCap_Origin[2]; SedModCap_Origin[1]], AN_SedPlate - 90 deg)
MirrorSedModPipingUp := MirrorAll([SedModMirrorLineX; SedModMirrorLineZ], [SedModMirrorLineX; SedModMirrorLineZ] + [zc; -zc/tan(AN_SedPlate)], "n")
DoubleSedModPiping := array_all(2, 1, W_SedPlate - 2*(S_Fitting + ConRadius(ND_SedModulePipe)))
ThawSedModLamella := ThawMultiple(["SedModLamella"])
ArraySedMod := array_all(1, N_SedModules, -B_SedPlate*N_SedModulePlates/sin(AN_SedPlate))
FreezeSedModComponents := FreezeMultiple(["SedMod*"])
SedModArrayScript := stack(ThawSedModPiping, view("f"), RotateSedModPiping, MirrorSedModPipingUp, view("t"), DoubleSedModPiping, ThawSedModLamella, ArraySedMod, FreezeSedModComponents)
SedLamellaScript := stack(SedLaminaScript, SedModCapScript, SedModPipeScript, SedModArrayScript)
# Floc Skimmer
# Origins and Dimensions
# The floc skimmer is a 2 inch nominal diameter pipe that starts at a coupling in the wall of the sedimentation tank under the exit channel, wraps around the exit channel and ends a few centimeters below the surface of the water in the sed tank.Its purpose is to capture any flocs that pass up through the plate settlers when the cap on the top of the pipe is removed.
H_SkimmerToSurface := (HW_Sed - Z_SedLaunder - outerradius(ND_SedLaunder))/2
SedSkimmerCoupling_Origin := [
    Plant_Origin[0] - L_Sed - T_PlantWall + SocketDepth(ND_SedSkimmer);
    Plant_Origin[1] + W_Sed - W_SedBay/2 - ConRadius(ND_SedLaunder) - S_Fitting - ConRadius(ND_SedSkimmer);
    Z_SedChannelBottom - T_ChannelWall - S_Fitting - ConRadius(ND_SedSkimmer)
]
SedSkimmerCap_Origin := [
    Plant_Origin[0] - L_Sed + W_SedExitChannel + W_SedInletChannel + T_SedWeir + T_ChannelWall + CapDiameter(ND_SedSkimmer)/2;
    SedSkimmerCoupling_Origin[1];
    Plant_Origin[2] + HW_Sed - H_SkimmerToSurface
]
SedSkimmerHorizPipe_Origin := [
    SedSkimmerCap_Origin[0] - ElbowRadius(ND_SedSkimmer);
    SedSkimmerCoupling_Origin[1];
    SedSkimmerCoupling_Origin[2]
]
SedSkimmerElbow_Origin := SedSkimmerHorizPipe_Origin + [ElbowRadius(ND_SedSkimmer); 0; ElbowRadius(ND_SedSkimmer)]
SedSkimmerVertPipe_Origin := SedSkimmerCap_Origin
# Skimmer Fittings
SedSkimmerCap := CapF(SedSkimmerCap_Origin, [0; -90]*deg, ND_SedSkimmer)
SedSkimmerElbow := ElbowSUBF(SedSkimmerElbow_Origin, [0; 0; 270]*deg, ND_SedSkimmer, PS_Default, ["SedModLamella"])
SedSkimmerCoupling := CouplingSUBF(SedSkimmerCoupling_Origin, [0; 0; 90]*deg, ND_SedSkimmer, PS_Default, ["SedTankCon"])
SedSkimmerFittingScript := stack(SelectSedRemovables, SedSkimmerCap, SedRemovableFrz, SelectSedFittings, SedSkimmerElbow, SedSkimmerCoupling, SedFittingFrz)
# Skimmer Pipes
SedSkimmerHorizPipe := PipeSUBF(SedSkimmerHorizPipe_Origin, W_SedInletChannel + W_SedExitChannel + T_SedWeir + T_ChannelWall + T_PlantWall - CouplingLength(ND_SedSkimmer) + ConRadius(ND_SedSkimmer) + SocketDepth(ND_SedSkimmer) - ElbowRadius(ND_SedSkimmer), [0; 0]*deg, ND_SedSkimmer, PS_Default, ["SedTankCon"])
SedSkimmerVertPipe := PipeSUBF(SedSkimmerVertPipe_Origin, SedSkimmerVertPipe_Origin[2] - SedSkimmerElbow_Origin[2], [0; -90]*deg, ND_SedSkimmer, PS_Default, ["SedModLamella"])
SedSkimmerPipeScript := stack(SelectSedPipes, SedSkimmerHorizPipe, SedSkimmerVertPipe, SedPipeFrz)
SedSkimmerScript := stack(SedSkimmerFittingScript, SedSkimmerPipeScript)
# Hopper Viewer
SedHopperViewerStub_Origin(N) := [
    Plant_Origin[0] - L_Sed + W_SedInletChannel + 2*T_SedWeir + W_SedExitChannelPostWeir + W_SedExitChannelPreWeir/2;
    SedManPipe_Origin[1] + ConRadius(ND_SedManifold) + S_Fitting - (N - 1)*W_SedBay;
    Z_SedChannelBottom - SocketDepth(ND_SedHopperViewer)
]
SedHopperViewerCoupling_Origin(N) := SedHopperViewerStub_Origin(N)
SedHopperViewerPipe_Origin(N) := SedHopperViewerCoupling_Origin(N) + [0 m; 0 m; -CouplingLength(ND_SedHopperViewer) + 2*SocketDepth(ND_SedHopperViewer)]
SedHopperViewerStubScript :=
    Local ← SelectSedRemovables
    for i ∈ 1 .. N_SedBays
        HopperViewerStub ← PipeF(SedHopperViewerStub_Origin(i), SocketDepth(ND_SedHopperViewer) + H_SedInletChannel, [0; 90]*deg, ND_SedHopperViewer, PS_Default)
        Local ← stack(Local, HopperViewerStub)
    Local ← stack(Local, SedRemovableFrz)
    return Local
SedHopperViewerCouplingScript :=
    Local ← SelectSedFittings
    for i ∈ 1 .. N_SedBays
        HopperViewerCoupling ← CouplingSUBF(SedHopperViewerCoupling_Origin(i), [0; 270]*deg, ND_SedHopperViewer, PS_Default, ["SedTankCon"])
        Local ← stack(Local, HopperViewerCoupling)
    Local ← stack(Local, SedFittingFrz)
    return Local
SedHopperViewerPipeScript :=
    Local ← SelectSedPipes
    for i ∈ 1 .. N_SedBays
        HopperViewerPipe ← PipeSUBF(SedHopperViewerPipe_Origin(i), T_ChannelWall - CouplingLength(ND_SedHopperViewer) + SocketDepth(ND_SedHopperViewer), [0; 270]*deg, ND_SedHopperViewer, PS_Default, ["SedTankCon"])
        Local ← stack(Local, HopperViewerPipe)
    Local ← stack(Local, SedPipeFrz)
    return Local
SedHopperViewerScript := stack(SedHopperViewerStubScript, SedHopperViewerCouplingScript, SedHopperViewerPipeScript)
# Finish Floc Hopper Drain
SedHopperDrainCoupling_Origin(N) := SedHopperDrainAdapter1_Origin + [CouplingLength(ND_SedHopperDrain); -(N - 1)*W_SedBay; 0 m]
SedHopperDrainPipe_Origin(N) := [
    Plant_Origin[0] - L_Sed + L_SedHopperBackSlope + L_SedHopperOffset*(L_SedHopperOffset > 0);
    SedHopperDrainCoupling_Origin(N)[1];
    Z_SedHopperIntersect + outerradius(ND_SedHopperDrain)
]
SedHopperDrainPipeScript :=
    Local ← SelectSedPipes
    for i ∈ 1 .. N_SedBays
        SedHopperDrainPipe ← PipeSUBF(SedHopperDrainPipe_Origin(i), L_SedHopperBackSlope + L_SedHopperOffset*(L_SedHopperOffset > 0) + T_PlantWall - CouplingLength(ND_SedHopperDrain) + SocketDepth(ND_SedHopperDrain), [0; 0]*deg, ND_SedHopperDrain, PS_Default, ["SedTankCon"])
        Local ← stack(Local, SedHopperDrainPipe)
    Wedge ← WedgeF([0; outerradius(ND_SedHopperDrain); outerradius(ND_SedHopperDrain)] + SedHopperDrainPipe_Origin(1), [
        -2*outerradius(ND_SedHopperDrain)/tan(AN_SedHopperSlope);
        -outerradius(ND_SedHopperDrain);
        -outerradius(ND_SedHopperDrain)
    ] + SedHopperDrainPipe_Origin(1), [0; 0; 0])
    ArrayWedge ← ArrayLast(N_SedBays, 1, -W_SedBay)
    Local ← stack(Local, SedPipeFrz, Wedge, ArrayWedge, GroupDelete, SubtractFromSedPipes)
    return Local
SedHopperDrainCouplingScript :=
    Local ← SelectSedFittings
    for i ∈ 1 .. N_SedBays
        SedHopperDrainCoupling ← CouplingSUBF(SedHopperDrainCoupling_Origin(i), [0; 0]*deg, ND_SedHopperDrain, PS_Default, ["SedTankCon"])
        Local ← stack(Local, SedHopperDrainCoupling)
    Local ← stack(Local, SedFittingFrz)
    return Local
SedHopperDrainFinishScript := stack(SedHopperDrainPipeScript, SedHopperDrainCouplingScript)
# Finish Sludge Drain Plumbing
SedSludgeDrainCoupling_Origin(N) := [
    CouplingLength(ND_SedSludgePipe) - SocketDepth(ND_SedSludgePipe) - T_PlantWall - L_Sed;
    W_Sed - W_SedBay/2 - (N - 1)*W_SedBay;
    H_SedSludge - outerradius(ND_SedSludgePipe)
] + Plant_Origin
SedSludgeDrainPipe_Origin(N) := Plant_Origin + [
    -L_Sed + L_SedHopper + T_ConcreteMin;
    W_Sed - W_SedBay/2 - (N - 1)*W_SedBay;
    H_SedSludge - outerradius(ND_SedSludgePipe)
]
SedSludgeDrainPipeScript :=
    Local ← SelectSedPipes
    for i ∈ 1 .. N_SedBays
        SludgePipe ← PipeSUBF(SedSludgeDrainPipe_Origin(i), L_SedSludgeEmbeddedPipe, [0; 0]*deg, ND_SedSludgePipe, PS_Default, ["SedTankCon"])
        Local ← stack(Local, SludgePipe)
    Local ← stack(Local, SedPipeFrz)
    return Local
SedSludgeDrainCouplingScript :=
    Local ← SelectSedFittings
    for i ∈ 1 .. N_SedBays
        SludgeCoupling ← CouplingSUBF(SedSludgeDrainCoupling_Origin(i), [0; 0]*deg, ND_SedSludgePipe, PS_Default, ["SedTankCon"])
        Local ← stack(Local, SludgeCoupling)
    Local ← stack(Local, SedFittingFrz)
    return Local
SedSludgeDrainFinishScript := stack(SedSludgeDrainPipeScript, SedSludgeDrainCouplingScript)
# Finish Inlet Manifold
# Origins and Dimensions
SedManVertCoupling_Origin(N) := [
    X_SedManStub;
    Plant_Origin[1] + W_Sed - W_SedBay/2 - (N - 1)*W_SedBay;
    Z_SedChannelBottom - SocketDepth(ND_SedManifold)
]
SedManVertPipe_Origin(N) := [0 m; 0 m; -CouplingLength(ND_SedManifold) + 2*SocketDepth(ND_SedManifold)] + SedManVertCoupling_Origin(N)
SedManElbow1_Origin(N) := [
    SedManVertCoupling_Origin(N)[0];
    SedManVertCoupling_Origin(N)[1];
    SedMan45Pipe_Origin[2] + L_SedMan45Pipe/sqrt(2) + ElbowRadius(ND_SedManifold)/sqrt(2)
]
# Inlet Manifold Fittings
SedManVertCouplingScript :=
    Local ← SelectSedFittings
    for i ∈ 1 .. N_SedBays
        ManCoupling ← CouplingSUBF(SedManVertCoupling_Origin(i), [0; 270]*deg, ND_SedManifold, PS_Default, ["SedTankCon"])
        Local ← stack(Local, ManCoupling)
    Local ← stack(Local, SedFittingFrz)
    return Local
SedManElbow1Script :=
    Local ← SelectSedFittings
    for i ∈ 1 .. N_SedBays
        ManElbow ← Elbow45SUBF(SedManElbow1_Origin(i), [180; 0; 90]*deg, ND_SedManifold, PS_Default, ["SedTankCon"])
        Local ← stack(Local, ManElbow)
    Local ← stack(Local, SedFittingFrz)
    return Local
# Inlet Manifold Pipes
SedManVertPipeScript :=
    Local ← SelectSedPipes
    for i ∈ 1 .. N_SedBays
        ManVertPipe ← PipeSUBF(SedManVertPipe_Origin(i), SedManVertPipe_Origin(i)[2] - SedManElbow1_Origin(i)[2], [0; 270]*deg, ND_SedManifold, PS_Default, ["SedTankCon"])
        Local ← stack(Local, ManVertPipe)
    Local ← stack(Local, SedPipeFrz)
    return Local
SedManFinishScript :=
    stack(SedManElbow1Script) if L_SedMan45HorizSpaceMin ≤ L_SedMan45VertSpaceNoCoupling ≤ L_SedMan45HorizSpaceMax
    stack(SedManVertCouplingScript, SedManElbow1Script, SedManVertPipeScript) otherwise
# Finish Exit Launder
# Origins and Dimensions
SedLaunderCoupling1_Origin(N) := [
    Plant_Origin[0] - L_Sed + W_SedExitChannel + W_SedInletChannel + T_SedWeir + SocketDepth(ND_SedLaunder);
    Plant_Origin[1] + W_Sed - W_SedBay/2 - (N - 1)*W_SedBay;
    Z_SedLaunder
]
SedLaunderCoupling2_Origin(N) := [
    Plant_Origin[0] - L_SedChannelToWall + max(0 m, 2*CouplingLength(ND_SedLaunder) - T_ChannelWall) - SocketDepth(ND_SedLaunder);
    Plant_Origin[1] + W_Sed - W_SedBay/2 - (N - 1)*W_SedBay;
    Z_SedLaunder
]
SedLaunderNipple_Origin(N) := SedLaunderCoupling1_Origin(N) + [CouplingLength(ND_SedLaunder) - 2*SocketDepth(ND_SedLaunder); 0 m; 0 m]
# Launder Fittings
SedLaunderCoupling1Script :=
    Local ← SelectSedFittings
    for i ∈ 1 .. N_SedBays
        LaunderCoupling ← CouplingSUBF(SedLaunderCoupling1_Origin(i), [0; 180]*deg, ND_SedLaunder, PS_Default, ["SedTankCon"])
        Local ← stack(Local, LaunderCoupling)
    Local ← stack(Local, SedFittingFrz)
    return Local
SedLaunderCoupling2Script :=
    Local ← SelectSedFittings
    for i ∈ 1 .. N_SedBays
        LaunderCoupling ← CouplingSUBF(SedLaunderCoupling2_Origin(i), [0; 0]*deg, ND_SedLaunder, PS_Default, ["SedTankCon"])
        Local ← stack(Local, LaunderCoupling)
    Local ← stack(Local, SedFittingFrz)
    return Local
# Launder Pipes
SedLaunderNippleScript :=
    Local ← SelectSedPipes
    for i ∈ 1 .. N_SedBays
        LaunderNipple ← PipeSUBF(SedLaunderNipple_Origin(i), T_ChannelWall - 2*CouplingLength(ND_SedLaunder) + 2*SocketDepth(ND_SedLaunder), [0; 180]*deg, ND_SedLaunder, PS_Default, ["SedTankCon"])
        Local ← stack(Local, LaunderNipple)
    Local ← stack(Local, SedPipeFrz)
    return Local
SedLaunderFinishScript :=
    SedLaunderCoupling1Script if CouplingLength(ND_SedLaunder) ≥ T_ChannelWall
    stack(SedLaunderCoupling1Script, SedLaunderCoupling2Script, SedLaunderNippleScript) otherwise
# Array Sed Tanks
ThawAllSed := ThawMultiple(["Sed*"])
ArraySedTank := Array_All(N_SedTanks, 1, W_Sed + T_PlantWall)
FreezeAllSed := FreezeMultiple(["Sed*"])
SelectSedConcrete := SelectLayer("SedTankCon")
SedTankArrayScript := stack(ThawAllSed, FreezeSedModComponents, ArraySedTank, FreezeAllSed, SelectSedConcrete, BrepAll, Union_All, FreezeSedTank)
# Note: Because we had to mirror instead of array the baffle components between sed bays, this section of code only works for 1 or 2 sed bays.
# Origins and Dimensions
L_SedBaffleWedge1Y := W_SedBay/2 - outerradius(ND_SedJetReverser) - (Z_SedManifoldPipe - (Z_SedSludge + T_ConcreteMin + outerradius(ND_SedJetReverser)))/tan(AN_SedSlope) - H_SedSlotDepth/sin(AN_SedSlope) - T_ConcreteMin + H_SedSlotDepth
L_SedBaffleWedge2Y := H_SedSlotDepth + W_SedBay/2 - (outerradius(ND_SedJetReverser) + (Z_SedManifoldPipe - (Z_SedSludge + T_ConcreteMin + outerradius(ND_SedJetReverser)))/tan(AN_SedSlope) + H_SedSlotDepth/sin(AN_SedSlope))
SedBaffleWedge1_Origin := [
    Plant_Origin[0] - L_SedUpflow - T_ConcreteMin/2 - T_SedWeirBaffle/2;
    Plant_Origin[1] + W_Sed - W_SedBay/2 - outerradius(ND_SedJetReverser) - (Z_SedManifoldPipe - (Z_SedSludge + T_ConcreteMin + outerradius(ND_SedJetReverser)))/tan(AN_SedSlope) - H_SedSlotDepth/sin(AN_SedSlope);
    Z_SedSideSlopes - T_ConcreteMin*tan(AN_SedSlope)
]
SedBaffleWedge2_Origin := [
    Plant_Origin[0] - L_SedUpflow - T_ConcreteMin/2 - T_SedWeirBaffle/2;
    Plant_Origin[1] + W_Sed - W_SedBay/2 + outerradius(ND_SedJetReverser) + (Z_SedManifoldPipe - (Z_SedSludge + T_ConcreteMin + outerradius(ND_SedJetReverser)))/tan(AN_SedSlope) + H_SedSlotDepth/sin(AN_SedSlope);
    Z_SedSideSlopes
]
# Cutting the Baffle Slot
SedBaffleSlot1 := BoxF([
    Plant_Origin[0] - L_SedUpflow - T_ConcreteMin/2 + T_SedWeirBaffle/2;
    Plant_Origin[1] + W_Sed - W_SedBay/2 - outerradius(ND_SedJetReverser) - (Z_SedManifoldPipe - (Z_SedSludge + T_ConcreteMin + outerradius(ND_SedJetReverser)))/tan(AN_SedSlope) - H_SedSlotDepth/sin(AN_SedSlope);
    Z_SedManifoldPipe
], [
    Plant_Origin[0] - L_SedUpflow - T_ConcreteMin/2 - T_SedWeirBaffle/2;
    Plant_Origin[1] + W_Sed - W_SedBay/2 + outerradius(ND_SedJetReverser) + (Z_SedManifoldPipe - (Z_SedSludge + T_ConcreteMin + outerradius(ND_SedJetReverser)))/tan(AN_SedSlope) + H_SedSlotDepth/sin(AN_SedSlope);
    Plant_Origin[2] + H_Sed
], [0; 0; 0]*deg)
SedBaffleSlot2 := WedgeF(SedBaffleWedge1_Origin, [
    SedBaffleWedge1_Origin[0] - L_SedBaffleWedge1Y;
    SedBaffleWedge1_Origin[1] - T_SedWeirBaffle;
    Z_SedManifoldPipe
], [90; 0; 0]*deg)
SedBaffleSlot3 := WedgeF(SedBaffleWedge2_Origin, [
    SedBaffleWedge2_Origin[0] - L_SedBaffleWedge2Y;
    SedBaffleWedge2_Origin[1] + T_SedWeirBaffle;
    Z_SedManifoldPipe
], [270; 0; 0]*deg)
SedBaffleSlot4 := BoxF([
    Plant_Origin[0] - L_SedUpflow - T_ConcreteMin/2 + T_SedWeirBaffle/2;
    Plant_Origin[1] + W_Sed + H_SedSlotDepth;
    Z_SedSideSlopes
], [
    Plant_Origin[0] - L_SedUpflow - T_ConcreteMin/2 - T_SedWeirBaffle/2;
    Plant_Origin[1] + W_Sed - W_SedBay/2 + outerradius(ND_SedJetReverser) + (Z_SedManifoldPipe - (Z_SedSludge + T_ConcreteMin + outerradius(ND_SedJetReverser)))/tan(AN_SedSlope) + H_SedSlotDepth/sin(AN_SedSlope);
    Plant_Origin[2] + H_Sed
], [0; 0; 0]*deg)
SedBaffleSlot5 := BoxF([
    Plant_Origin[0] - L_SedUpflow - T_ConcreteMin/2 + T_SedWeirBaffle/2;
    Plant_Origin[1] + W_Sed - W_SedBay + T_ConcreteMin - H_SedSlotDepth;
    Z_SedSideSlopes - T_ConcreteMin*tan(AN_SedSlope)
], [
    Plant_Origin[0] - L_SedUpflow - T_ConcreteMin/2 - T_SedWeirBaffle/2;
    Plant_Origin[1] + W_Sed - W_SedBay/2 - outerradius(ND_SedJetReverser) - (Z_SedManifoldPipe - (Z_SedSludge + T_ConcreteMin + outerradius(ND_SedJetReverser)))/tan(AN_SedSlope) - H_SedSlotDepth/sin(AN_SedSlope);
    Plant_Origin[2] + H_Sed
], [0; 0; 0]*deg)
MirrorSedBaffleBays := MirrorAll([Plant_Origin[0]; Plant_Origin[1] + W_Sed - W_SedBay], [Plant_Origin[0] + zc; Plant_Origin[1] + W_Sed - W_SedBay], "n")
SedBaffleSlotScript :=
    stack(view("t"), SedBaffleSlot1, SedBaffleSlot2, SedBaffleSlot3, SedBaffleSlot4, SedBaffleSlot5, ArraySedTank, GroupDelete, SubtractSedConCutouts) if N_SedBays == 1
    stack(view("t"), SedBaffleSlot1, SedBaffleSlot2, SedBaffleSlot3, SedBaffleSlot4, SedBaffleSlot5, MirrorSedBaffleBays, ArraySedTank, GroupDelete, SubtractSedConCutouts) otherwise
# Floc Weir Baffle
SedBaffleLayer := layer_new("SedBaffle", yellow)
SelectSedBaffle := SelectLayer("SedBaffle")
SedBafflePiece1 := BoxF([
    Plant_Origin[0] - L_SedUpflow - T_ConcreteMin/2 + T_SedWeirBaffle/2;
    Plant_Origin[1] + W_Sed - W_SedBay/2 - outerradius(ND_SedJetReverser) - (Z_SedManifoldPipe - (Z_SedSludge + T_ConcreteMin + outerradius(ND_SedJetReverser)))/tan(AN_SedSlope) - H_SedSlotDepth/sin(AN_SedSlope);
    Z_SedManifoldPipe
], [
    Plant_Origin[0] - L_SedUpflow - T_ConcreteMin/2 - T_SedWeirBaffle/2;
    Plant_Origin[1] + W_Sed - W_SedBay/2 + outerradius(ND_SedJetReverser) + (Z_SedManifoldPipe - (Z_SedSludge + T_ConcreteMin + outerradius(ND_SedJetReverser)))/tan(AN_SedSlope) + H_SedSlotDepth/sin(AN_SedSlope);
    Z_SedFlocWeir
], [0; 0; 0]*deg)
SedBafflePiece2 := WedgeF(SedBaffleWedge1_Origin, [
    SedBaffleWedge1_Origin[0] - L_SedBaffleWedge1Y;
    SedBaffleWedge1_Origin[1] - T_SedWeirBaffle;
    Z_SedManifoldPipe
], [90; 0; 0]*deg)
SedBafflePiece3 := WedgeF(SedBaffleWedge2_Origin, [
    SedBaffleWedge2_Origin[0] - L_SedBaffleWedge2Y;
    SedBaffleWedge2_Origin[1] + T_SedWeirBaffle;
    Z_SedManifoldPipe
], [270; 0; 0]*deg)
SedBafflePiece4 := BoxF([
    Plant_Origin[0] - L_SedUpflow - T_ConcreteMin/2 + T_SedWeirBaffle/2;
    Plant_Origin[1] + W_Sed + H_SedSlotDepth;
    Z_SedSideSlopes
], [
    Plant_Origin[0] - L_SedUpflow - T_ConcreteMin/2 - T_SedWeirBaffle/2;
    Plant_Origin[1] + W_Sed - W_SedBay/2 + outerradius(ND_SedJetReverser) + (Z_SedManifoldPipe - (Z_SedSludge + T_ConcreteMin + outerradius(ND_SedJetReverser)))/tan(AN_SedSlope) + H_SedSlotDepth/sin(AN_SedSlope);
    Z_SedFlocWeir
], [0; 0; 0]*deg)
SedBafflePiece5 := BoxF([
    Plant_Origin[0] - L_SedUpflow - T_ConcreteMin/2 + T_SedWeirBaffle/2;
    Plant_Origin[1] + W_Sed - W_SedBay + T_ConcreteMin - H_SedSlotDepth;
    Z_SedSideSlopes - T_ConcreteMin*tan(AN_SedSlope)
], [
    Plant_Origin[0] - L_SedUpflow - T_ConcreteMin/2 - T_SedWeirBaffle/2;
    Plant_Origin[1] + W_Sed - W_SedBay/2 - outerradius(ND_SedJetReverser) - (Z_SedManifoldPipe - (Z_SedSludge + T_ConcreteMin + outerradius(ND_SedJetReverser)))/tan(AN_SedSlope) - H_SedSlotDepth/sin(AN_SedSlope);
    Z_SedFlocWeir
], [0; 0; 0]*deg)
SedBaffleFrz := FreezeLayer("SedBaffle")
SedBaffleSemicircleCut := SubtractF(["SedBaffle"], "DeleteMe")
SedBaffleScript :=
    stack(SedBaffleLayer, SedBafflePiece1, SedBafflePiece2, SedBafflePiece3, SedBafflePiece4, SedBafflePiece5, Union_All, SedBaffleFrz, SedManifoldRestCutout, GroupDelete, SedBaffleSemicircleCut, SelectSedBaffle, ArraySedTank, SedBaffleFrz) if N_SedBays == 1
    stack(SedBaffleLayer, SedBafflePiece1, SedBafflePiece2, SedBafflePiece3, SedBafflePiece4, SedBafflePiece5, Union_All, SedBaffleFrz, SedManifoldRestCutout, GroupDelete, SedBaffleSemicircleCut, SelectSedBaffle, MirrorSedBaffleBays, ArraySedTank, SedBaffleFrz) otherwise
SedFlocWeirScript := stack(SedBaffleSlotScript, SedBaffleScript)
# Floc Weir Baffle and Slot
# Lamella Pipe Frame (not currently drawn)
# Note: The pipe frame is currently not being drawn because feedback from Honduras said that it's too expensive to be worthwhile for long sed tanks. The plate settlers are just supported by a ledge.
SedPipeFrame_Origin := [
    Plant_Origin[0] - L_SedPlate*cos(60 deg) + outerradius(ND_SedFrameStub) + H_SedFrameStub/tan(60 deg);
    Plant_Origin[1];
    Z_SedLamellaBottom - outerradius(ND_SedPlateFrame)
]
B_SedPipesX := min(L_SedActive, L_Sed - W_SedExitChannel - T_ChannelWall - cos(AN_SedPlate)*L_SedPlate - 2*S_Fitting - 2*ConRadius(ND_SedManifold) - outerradius(ND_SedPlateFrame))/2
SedPipeFrameLayer := layer_new("SedPF", yellow)
PFPipeLong1 := PipeF([
    SedPipeFrame_Origin[0] - ShortTeeLength(ND_SedPlateFrame);
    Plant_Origin[1] + B_SedPlateFrameVertical;
    SedPipeFrame_Origin[2]
], B_SedPipesX - TeeLength(ND_SedPlateFrame), [0; 0]*deg, ND_SedPlateFrame, PS_Default)
PFPipeLong2 := PipeF([
    SedPipeFrame_Origin[0] - ShortTeeLength(ND_SedPlateFrame);
    Plant_Origin[1] + W_SedBay - B_SedPlateFrameVertical;
    SedPipeFrame_Origin[2]
], B_SedPipesX - TeeLength(ND_SedPlateFrame), [0; 0]*deg, ND_SedPlateFrame, PS_Default)
PFPipeMid1 := PipeF([
    SedPipeFrame_Origin[0] - 3*ShortTeeLength(ND_SedPlateFrame) - B_SedPipesX;
    Plant_Origin[1] + B_SedPlateFrameVertical;
    SedPipeFrame_Origin[2]
], B_SedPipesX - 2*TeeLength(ND_SedPlateFrame), [0; 0]*deg, ND_SedPlateFrame, PS_Default)
PFPipeMid2 := PipeF([
    SedPipeFrame_Origin[0] - 3*ShortTeeLength(ND_SedPlateFrame) - B_SedPipesX;
    Plant_Origin[1] + W_SedBay - B_SedPlateFrameVertical;
    SedPipeFrame_Origin[2]
], B_SedPipesX - 2*TeeLength(ND_SedPlateFrame), [0; 0]*deg, ND_SedPlateFrame, PS_Default)
PFPipeLeft1 := PipeF([
    SedPipeFrame_Origin[0] - 3*ShortTeeLength(ND_SedPlateFrame) - 2*B_SedPipesX;
    Plant_Origin[1] + B_SedPlateFrameVertical;
    SedPipeFrame_Origin[2]
], SedPipeFrame_Origin[0] - ShortTeeLength(ND_SedPlateFrame) - 2*B_SedPipesX - (Plant_Origin[0] - L_Sed) - TeeLength(ND_SedPlateFrame), [0; 0]*deg, ND_SedPlateFrame, PS_Default)
PFPipeLeft2 := PipeF([
    SedPipeFrame_Origin[0] - 3*ShortTeeLength(ND_SedPlateFrame) - 2*B_SedPipesX;
    Plant_Origin[1] + W_SedBay - B_SedPlateFrameVertical;
    SedPipeFrame_Origin[2]
], SedPipeFrame_Origin[0] - ShortTeeLength(ND_SedPlateFrame) - 2*B_SedPipesX - (Plant_Origin[0] - L_Sed) - TeeLength(ND_SedPlateFrame), [0; 0]*deg, ND_SedPlateFrame, PS_Default)
DrawPFStub := PipeF([
    SedPipeFrame_Origin[0];
    Plant_Origin[1] + B_SedPlateFrameVertical;
    SedPipeFrame_Origin[2] + outerradius(ND_SedPlateFrame)
], H_SedFrameStub, [0; 90]*deg, ND_SedFrameStub, 1)
ArrayPFStubRow := ArrayLast(1, N_SedModules + 1, -B_SedFrameStub)
ArrayPFStubColumn := ArrayLast(2, 1, W_SedBay - 2*B_SedPlateFrameVertical)
ArrayPFPieces := array_all(N_SedBays, 1, W_SedBay)
PipeFrameArrayPieces :=
    stack(SedPipeFrameLayer, PFPipeLong1, PFPipeLong2, PFPipeMid1, PFPipeMid2, PFPipeLeft1, PFPipeLeft2, DrawPFStub, ArrayPFStubRow, ArrayPFStubColumn) if N_SedBays == 1
    stack(SedPipeFrameLayer, PFPipeLong1, PFPipeLong2, PFPipeMid1, PFPipeMid2, PFPipeLeft1, PFPipeLeft2, DrawPFStub, ArrayPFStubRow, ArrayPFStubColumn, ArrayPFPieces) otherwise
PFPipePerpendicular := PipeF(SedPipeFrame_Origin + [0; B_SedPlateFrameVertical + ShortTeeLength(ND_SedPlateFrame); 0], W_SedBay - 2*B_SedPlateFrameVertical - TeeLength(ND_SedPlateFrame), [270; 0]*deg, ND_SedPlateFrame, PS_Default)
ArrayPFPerp := ArrayLastGen(N_SedBays, 3, W_SedBay, -B_SedPipesX)
FreezeSedPipeFrame := FreezeLayer("SedPF")
PipeFrameTeeLayer := layer_new("SedPFTee", yellow)
SedPFTee2 := TeeF(SedPipeFrame_Origin + [-B_SedPipesX; B_SedPlateFrameVertical + ShortTeeLength(ND_SedPlateFrame); 0], [0; 0; 0]*deg, ND_SedPlateFrame, PS_Default)
SedPFTee3 := TeeF(SedPipeFrame_Origin + [
    -TeeLength(ND_SedPlateFrame) - B_SedPipesX;
    B_SedPlateFrameVertical - ShortTeeLength(ND_SedPlateFrame);
    0
], [180; 0; 0]*deg, ND_SedPlateFrame, PS_Default)
ArrayPFTees := array_all(1, 2, -B_SedPipesX)
SedPFTee1 := TeeF([
    SedPipeFrame_Origin[0] - ShortTeeLength(ND_SedPlateFrame);
    Plant_Origin[1] + B_SedPlateFrameVertical;
    SedPipeFrame_Origin[2]
], [90; 0; 0]*deg, ND_SedPlateFrame, PS_Default)
MirrorPFTees := Mirror3dAll("zx", [Plant_Origin[0]; Plant_Origin[1] + 0.5*W_SedBay], "n")
ArrayPFTeeBay := array_all(N_SedBays, 1, W_SedBay)
PipeFrameTeeFrz := FreezeLayer("SedPFTee")
SedPFTees := stack(PipeFrameTeeLayer, SedPFTee2, SedPFTee3, ArrayPFTees, SedPFTee1, MirrorPFTees, ArrayPFTeeBay, PipeFrameTeeFrz)
PFSLayer := layer_new("SedPFSupport", yellow)
PFTeePipeMid :=
    Local ← PipeF([
        SedPipeFrame_Origin[0];
        Plant_Origin[1] + W_SedBay + B_SedPlateFrameVertical - ShortTeeLength(ND_SedPlateFrame);
        SedPipeFrame_Origin[2]
    ], 2*(B_SedPlateFrameVertical - ShortTeeLength(ND_SedPlateFrame)), [90; 0]*deg, ND_SedPlateFrame, PS_Default)
    for i ∈ 1 .. 2
        Local ← stack(Local, PipeF([
            SedPipeFrame_Origin[0] - TeeLength(ND_SedPlateFrame) - B_SedPipesX*i;
            Plant_Origin[1] + W_SedBay + B_SedPlateFrameVertical - ShortTeeLength(ND_SedPlateFrame);
            SedPipeFrame_Origin[2]
        ], 2*(B_SedPlateFrameVertical - ShortTeeLength(ND_SedPlateFrame)), [90; 0]*deg, ND_SedPlateFrame, PS_Default))
ArrayTeePipeMid := Array_All(N_SedBays - 1, 1, W_SedBay)
PFSFlangeArray :=
    Local ← CylinderF([
        SedPipeFrame_Origin[0];
        SedPipeFrame_Origin[1] + W_Sed - W_SedBay;
        SedPipeFrame_Origin[2] - ConRadius(ND_SedPlateFrame)
    ], D_Flange/2, T_Flange, [0; 270]*deg)
    for i ∈ 1 .. 2
        Local ← stack(Local, CylinderF([
            SedPipeFrame_Origin[0] - TeeLength(ND_SedPlateFrame) - B_SedPipesX*i;
            SedPipeFrame_Origin[1] + W_Sed - W_SedBay;
            SedPipeFrame_Origin[2] - ConRadius(ND_SedPlateFrame)
        ], D_Flange/2, T_Flange, [0; 270]*deg))
PFSPipeArray :=
    Local ← CylinderF([
        SedPipeFrame_Origin[0];
        SedPipeFrame_Origin[1] + W_SedBay;
        SedPipeFrame_Origin[2] - ConRadius(ND_SedPlateFrame) - T_Flange
    ], outerradius(ND_SedPlateFrame), SedPipeFrame_Origin[2] - ConRadius(ND_SedPlateFrame) - T_Flange - (((W_SedBay - W_SedSludge)/2 - 2*T_ConcreteMin)*tan(AN_SedSlope) + H_SedSludge + H_SedDrainCoverTotal), [0; 270]*deg)
    for i ∈ 1 .. 2
        Local ← stack(Local, CylinderF([
            SedPipeFrame_Origin[0] - TeeLength(ND_SedPlateFrame) - B_SedPipesX*i;
            SedPipeFrame_Origin[1] + W_SedBay;
            SedPipeFrame_Origin[2] - ConRadius(ND_SedPlateFrame) - T_Flange
        ], outerradius(ND_SedPlateFrame), SedPipeFrame_Origin[2] - ConRadius(ND_SedPlateFrame) - T_Flange - (((W_SedBay - W_SedSludge)/2 - 2*T_ConcreteMin)*tan(AN_SedSlope) + H_SedSludge + H_SedDrainCoverTotal), [0; 270]*deg))
FreezePFS := FreezeLayer("SedPFSupport")
PFTeePipeLayer := layer_new("SedPFTeePipes", yellow)
PFTeePipeShort :=
    Local ← PipeF([
        SedPipeFrame_Origin[0];
        Plant_Origin[1] + B_SedPlateFrameVertical - ShortTeeLength(ND_SedPlateFrame);
        SedPipeFrame_Origin[2]
    ], B_SedPlateFrameVertical - ShortTeeLength(ND_SedPlateFrame), [90; 0]*deg, ND_SedPlateFrame, PS_Default)
    for i ∈ 1 .. 2
        Local ← stack(Local, PipeF([
            SedPipeFrame_Origin[0] - TeeLength(ND_SedPlateFrame) - B_SedPipesX*i;
            Plant_Origin[1] + B_SedPlateFrameVertical - ShortTeeLength(ND_SedPlateFrame);
            SedPipeFrame_Origin[2]
        ], B_SedPlateFrameVertical - ShortTeeLength(ND_SedPlateFrame), [90; 0]*deg, ND_SedPlateFrame, PS_Default))
MirrorPFTeePipeShort := MirrorAll([Plant_Origin[0] - L_Sed/2; Plant_Origin[1] + W_Sed/2], [Plant_Origin[0] - L_Sed/2 - zc; Plant_Origin[1] + W_Sed/2], "n")
FrzPFTeePipes := FreezeLayer("SedPFTeePipes")
SedPipeFrameScript :=
    stack(SedPFTees, PipeFrameArrayPieces, PFPipePerpendicular, ArrayPFPerp, FreezeSedPipeFrame, PFSLayer, PFTeePipeMid, PFSFlangeArray, PFSPipeArray, FreezePFS, PFTeePipeLayer, PFTeePipeShort, MirrorPFTeePipeShort, FrzPFTeePipes) if (N_SedBays == 2) and (Z_SedLamellaBottom - (Plant_Origin[2] + H_SedSideSlopes + 2*ConRadius(ND_SedPlateFrame)) ≠ 0 m)
    stack(SedPFTees, PipeFrameArrayPieces, PFPipePerpendicular, ArrayPFPerp, FreezeSedPipeFrame, PFSLayer, PFTeePipeMid, ArrayTeePipeMid, PFSFlangeArray, PFSPipeArray, FreezePFS, PFTeePipeLayer, PFTeePipeShort, MirrorPFTeePipeShort, FrzPFTeePipes) if (N_SedBays > 2) and (Z_SedLamellaBottom - (Plant_Origin[2] + H_SedSideSlopes + 2*ConRadius(ND_SedPlateFrame)) ≠ 0 m)
    stack(SedPFTees, PipeFrameArrayPieces, PFPipePerpendicular, ArrayPFPerp, FreezeSedPipeFrame, PFTeePipeLayer, PFTeePipeShort, MirrorPFTeePipeShort, FrzPFTeePipes) otherwise
# Inlet Manifold Diffusers
SedDiffuser_Origin := [
    Plant_Origin[0] - L_Sed + L_SedHopper + L_SedDiffuserOutlet/2 + T_SedDiffuserWall;
    SedManPipe_Origin[1];
    -innerdiameter(ND_SedManifold, PS_Default)/2 + SedManPipe_Origin[2]
]
SedDiffLayer := layer_new("SedManifoldDiffuserPlu", blue)
SedDiffOuterCircleSection := circle([SedDiffuser_Origin[0]; SedDiffuser_Origin[1]; SedDiffuser_Origin[2]], outerradius(ND_SedDiffuser))
SedDiffOuterRectangleSection := Pline3D([
    [
        SedDiffuser_Origin[0] + L_SedDiffuserOutlet/2 + T_SedDiffuserWall/Pi_PvcStretch;
        SedDiffuser_Origin[1] + W_SedDiffuserOutlet/2 + T_SedDiffuserWall/Pi_PvcStretch;
        SedDiffuser_Origin[2] - L_SedManifoldDiffuser
    ];
    [
        SedDiffuser_Origin[0] - L_SedDiffuserOutlet/2 - T_SedDiffuserWall/Pi_PvcStretch;
        SedDiffuser_Origin[1] + W_SedDiffuserOutlet/2 + T_SedDiffuserWall/Pi_PvcStretch;
        SedDiffuser_Origin[2] - L_SedManifoldDiffuser
    ];
    [
        SedDiffuser_Origin[0] - L_SedDiffuserOutlet/2 - T_SedDiffuserWall/Pi_PvcStretch;
        SedDiffuser_Origin[1] - W_SedDiffuserOutlet/2 - T_SedDiffuserWall/Pi_PvcStretch;
        SedDiffuser_Origin[2] - L_SedManifoldDiffuser
    ];
    [
        SedDiffuser_Origin[0] + L_SedDiffuserOutlet/2 + T_SedDiffuserWall/Pi_PvcStretch;
        SedDiffuser_Origin[1] - W_SedDiffuserOutlet/2 - T_SedDiffuserWall/Pi_PvcStretch;
        SedDiffuser_Origin[2] - L_SedManifoldDiffuser
    ];
    [
        SedDiffuser_Origin[0] + L_SedDiffuserOutlet/2 + T_SedDiffuserWall/Pi_PvcStretch;
        SedDiffuser_Origin[1] + W_SedDiffuserOutlet/2 + T_SedDiffuserWall/Pi_PvcStretch;
        SedDiffuser_Origin[2] - L_SedManifoldDiffuser
    ]
])
SedDiffZoomOuter := ZoomWindow([SedDiffuser_Origin[0] - L_SedDiffuserOutlet; SedDiffuser_Origin[1] + W_SedDiffuserOutlet], [SedDiffuser_Origin[0] + L_SedDiffuserOutlet; SedDiffuser_Origin[1] - W_SedDiffuserOutlet])
SedDiffOuterLoft := Loft([SedDiffuser_Origin[0] + outerradius(ND_SedDiffuser); SedDiffuser_Origin[1]; SedDiffuser_Origin[2]], [
    SedDiffuser_Origin[0] + L_SedDiffuserOutlet/2 + T_SedDiffuserWall/Pi_PvcStretch;
    SedDiffuser_Origin[1] + W_SedDiffuserOutlet/2 + T_SedDiffuserWall/Pi_PvcStretch;
    SedDiffuser_Origin[2] - L_SedManifoldDiffuser
])
SedDiffuserFreeze := FreezeLayer("SedManifoldDiffuserPlu")
SedDiffInnerCircleSection := circle([SedDiffuser_Origin[0]; SedDiffuser_Origin[1]; SedDiffuser_Origin[2]], innerdiameter(ND_SedDiffuser, PS_Default)/2)
SedDiffInnerRectangleSection := Pline3D([
    [
        SedDiffuser_Origin[0] + L_SedDiffuserOutlet/2;
        SedDiffuser_Origin[1] + W_SedDiffuserOutlet/2;
        SedDiffuser_Origin[2] - L_SedManifoldDiffuser
    ];
    [
        SedDiffuser_Origin[0] - L_SedDiffuserOutlet/2;
        SedDiffuser_Origin[1] + W_SedDiffuserOutlet/2;
        SedDiffuser_Origin[2] - L_SedManifoldDiffuser
    ];
    [
        SedDiffuser_Origin[0] - L_SedDiffuserOutlet/2;
        SedDiffuser_Origin[1] - W_SedDiffuserOutlet/2;
        SedDiffuser_Origin[2] - L_SedManifoldDiffuser
    ];
    [
        SedDiffuser_Origin[0] + L_SedDiffuserOutlet/2;
        SedDiffuser_Origin[1] - W_SedDiffuserOutlet/2;
        SedDiffuser_Origin[2] - L_SedManifoldDiffuser
    ];
    [
        SedDiffuser_Origin[0] + L_SedDiffuserOutlet/2;
        SedDiffuser_Origin[1] + W_SedDiffuserOutlet/2;
        SedDiffuser_Origin[2] - L_SedManifoldDiffuser
    ]
])
SedDiffZoomInner := ZoomWindow([SedDiffuser_Origin[0] - L_SedDiffuserOutlet; SedDiffuser_Origin[1] + W_SedDiffuserOutlet], [SedDiffuser_Origin[0] + L_SedDiffuserOutlet; SedDiffuser_Origin[1] - W_SedDiffuserOutlet])
SedDiffInnerLoft := Loft([
    SedDiffuser_Origin[0] + innerdiameter(ND_SedDiffuser, PS_Default)/2;
    SedDiffuser_Origin[1];
    SedDiffuser_Origin[2]
], [
    SedDiffuser_Origin[0] + L_SedDiffuserOutlet/2;
    SedDiffuser_Origin[1] + W_SedDiffuserOutlet/2;
    SedDiffuser_Origin[2] - L_SedManifoldDiffuser
])
SedDiffGroupInner := GroupAll("DeleteMe")
SedDiffSubtract := SubtractF(["SedManifoldDiffuserPlu"], "DeleteMe")
SedDiffSelect := SelectLayer("SedManifoldDiffuserPlu")
SedDiffArray := Array_All(1, N_SedManifoldPorts, B_SedManifoldPort)
SedDiffuserScript := stack(SedDiffLayer, SedDiffOuterCircleSection, SedDiffOuterRectangleSection, SedDiffZoomOuter, SedDiffOuterLoft, SedDiffuserFreeze, SedDiffInnerCircleSection, SedDiffInnerRectangleSection, SedDiffZoomInner, SedDiffInnerLoft, SedDiffGroupInner, SedDiffSubtract, SedDiffSelect, SedDiffArray, SedDiffuserFreeze)
# Finish Inlet and Exit Channels
# Cut channels out of tank walls
SedChannelCutout := BoxF([Plant_Origin[0] - L_Sed; Plant_Origin[1]; Z_SedChannelBottom], [
    Plant_Origin[0] - L_Sed + W_SedInletChannel + T_SedWeir + W_SedExitChannel;
    Plant_Origin[1] + N_SedTanks*W_Sed + (N_SedTanks - 1)*T_PlantWall;
    Z_SedChannelBottom + H_SedInletChannel
], [0; 0; 0]*deg)
SedInletCutout := BoxF([Plant_Origin[0] - L_Sed; Plant_Origin[1] + N_SedTanks*(W_Sed + T_PlantWall); Z_SedChannelBottom], [
    Plant_Origin[0] - L_Sed + W_SedInletChannelPreWeir;
    Plant_Origin[1] + N_SedTanks*(W_Sed + T_PlantWall) - T_PlantWall;
    Z_SedChannelBottom + H_SedInletChannel
], [0; 0; 0]*deg)
SedChannelCutoutScript := stack(SedChannelCutout, SedInletCutout, GroupDelete, SubtractSedConCutouts)
# Channel Weirs and Dividing Wall
SelectSedTankLayer := SelectLayer("SedTankCon")
SedInletChannelYWeir := BoxF([
    Plant_Origin[0] - L_Sed + W_SedInletChannelPreWeir;
    Plant_Origin[1] + 2*(S_Fitting + ConRadius(ND_SedExitChannelDrain));
    Z_SedChannelBottom
], [
    Plant_Origin[0] - L_Sed + W_SedInletChannelPreWeir + T_SedWeir;
    Plant_Origin[1] - T_PlantWall + (W_SedBay*N_SedBays + T_PlantWall)*N_SedTanks;
    Z_SedChannelBottom + H_SedWeirInlet
], [0; 0; 0]*deg)
SedInletChannelXWeir := BoxF([
    Plant_Origin[0] - L_Sed + W_SedInletChannelPreWeir;
    Plant_Origin[1] + 2*(S_Fitting + ConRadius(ND_SedExitChannelDrain));
    Z_SedChannelBottom
], [
    Plant_Origin[0] - L_Sed;
    Plant_Origin[1] + 2*(S_Fitting + ConRadius(ND_SedExitChannelDrain)) + T_SedWeir;
    Z_SedChannelBottom + H_SedWeirInlet
], [0; 0; 0]*deg)
SedChannelDivider := BoxF([Plant_Origin[0] - L_Sed + W_SedInletChannel; Plant_Origin[1]; Z_SedChannelBottom], [
    Plant_Origin[0] - L_Sed + W_SedInletChannel + T_SedWeir;
    Plant_Origin[1] - T_PlantWall + (W_SedBay*N_SedBays + T_PlantWall)*N_SedTanks;
    Z_SedChannelBottom + H_SedInletChannel
], [0; 0; 0]*deg)
SedExitChannelWeirY := BoxF([
    Plant_Origin[0] - L_Sed + W_SedInletChannel + T_SedWeir + W_SedExitChannelPostWeir;
    Plant_Origin[1];
    Z_SedChannelBottom
], [
    Plant_Origin[0] - L_Sed + W_SedInletChannel + 2*T_SedWeir + W_SedExitChannelPostWeir;
    Plant_Origin[1] - T_PlantWall + (W_SedBay*N_SedBays + T_PlantWall)*N_SedTanks - S_Fitting - OuterDiameterFittingPVC(ND_FiEntrancePipe);
    Z_SedChannelBottom + H_SedWeirExit
], [0; 0; 0]*deg)
SedExitChannelWeirX := BoxF([
    Plant_Origin[0] - L_Sed + W_SedInletChannel + T_SedWeir + W_SedExitChannelPostWeir;
    Plant_Origin[1] - T_PlantWall + (W_Sed + T_PlantWall)*N_SedTanks - OuterDiameterFittingPVC(ND_FiEntrancePipe) - S_Fitting - T_SedWeir;
    Z_SedChannelBottom
], [
    Plant_Origin[0] - L_Sed + W_SedInletChannel + 2*T_SedWeir + W_SedExitChannelPostWeir + W_SedExitChannelPreWeir;
    Plant_Origin[1] - T_PlantWall + (W_Sed + T_PlantWall)*N_SedTanks - S_Fitting - OuterDiameterFittingPVC(ND_FiEntrancePipe);
    Z_SedChannelBottom + H_SedWeirExit
], [0; 0; 0]*deg)
SedChannelWeirScript := stack(SelectSedTankLayer, SedInletChannelYWeir, SedInletChannelXWeir, SedChannelDivider, SedExitChannelWeirY, SedExitChannelWeirX, Union_All, FreezeSedTank)
FinishSedChannelScript := stack(SedChannelCutoutScript, SedChannelWeirScript)
# Inlet Channel Drain
# Origins and Dimensions
SedIChannelDrainVertCoupling_Origin := [
    Plant_Origin[0] - L_Sed - T_PlantWall + max(T_PlantWall, CouplingLength(ND_SedInletChannelDrain)) + SocketDepth(ND_SedInletChannelDrain) + ElbowRadius(ND_SedInletChannelDrain);
    Plant_Origin[1] + S_Fitting + ConRadius(ND_SedInletChannelDrain);
    Plant_Origin[2] + Z_SedChannelBottom - CouplingLength(ND_SedInletChannelDrain) + SocketDepth(ND_SedInletChannelDrain)
]
L_SedIChannelVertPipe := Z_SedChannelBottom - CouplingLength(ND_SedInletChannelDrain) - ElbowRadius(ND_SedInletChannelDrain) - ConRadius(ND_SedInletChannelDrain)
L_SedIChannelHorizPipe := SedIChannelDrainVertCoupling_Origin[0] - (Plant_Origin[0] - L_Sed - T_PlantWall) - CouplingLength(ND_SedInletChannelDrain) + SocketDepth(ND_SedInletChannelDrain) - ElbowRadius(ND_SedInletChannelDrain)
SedIChannelDrainHorizCoupling_Origin := [
    Plant_Origin[0] - T_PlantWall - SocketDepth(ND_SedExitChannelDrain) - L_Sed + CouplingLength(ND_SedExitChannelDrain);
    SedIChannelDrainVertCoupling_Origin[1];
    SedIChannelDrainVertCoupling_Origin[2] - L_SedIChannelVertPipe - ElbowRadius(ND_SedExitChannelDrain)
]
# Inlet Channel Drain Fittings
SedIChannelDrainVertCoupling := CouplingSUBF(SedIChannelDrainVertCoupling_Origin, [0; 90; 0]*deg, ND_SedInletChannelDrain, PS_Default, ["SedTankCon"])
SedIChannelDrainElbow := ElbowSUBF(SedIChannelDrainVertCoupling_Origin + [0 m; 0 m; -L_SedIChannelVertPipe], [0; 0; 270]*deg, ND_SedInletChannelDrain, PS_Default, ["SedTankCon"])
SedIChannelHorizCoupling := CouplingSUBF(SedIChannelDrainHorizCoupling_Origin, [0; 0; 0]*deg, ND_SedExitChannelDrain, PS_Default, ["SedTankCon"])
SedInletChannelDrainFittingScript := stack(SelectSedFittings, SedIChannelDrainVertCoupling, SedIChannelDrainElbow, SedIChannelHorizCoupling, SedFittingFrz)
# Inlet Channel Drain Pipes
SedIChannelDrainHorizPipe := PipeSUBF([
    SedIChannelDrainVertCoupling_Origin[0] - ElbowRadius(ND_SedInletChannelDrain);
    SedIChannelDrainVertCoupling_Origin[1];
    SedIChannelDrainHorizCoupling_Origin[2]
], L_SedIChannelHorizPipe, [0; 0; 0]*deg, ND_SedInletChannelDrain, PS_Default, ["SedTankCon"])
SedIChannelDrainVertPipe := PipeSUBF(SedIChannelDrainVertCoupling_Origin, L_SedIChannelVertPipe, [0; 270; 0]*deg, ND_SedInletChannelDrain, PS_Default, ["SedTankCon"])
SedIChannelDrainStub := PipeF(SedIChannelDrainVertCoupling_Origin + [0 m; 0 m; CouplingLength(ND_SedInletChannelDrain) - SocketDepth(ND_SedInletChannelDrain)], H_SedInletChannel + SocketDepth(ND_SedInletChannelDrain), [0; 90; 0]*deg, ND_SedInletChannelDrain, PS_Default)
SedInletChannelDrainPipeScript := stack(SelectSedPipes, SedIChannelDrainHorizPipe, SedIChannelDrainVertPipe, SedPipeFrz, SelectSedRemovables, SedIChannelDrainStub, SedRemovableFrz)
SedInletDrainScript := stack(SedInletChannelDrainFittingScript, SedInletChannelDrainPipeScript)
# Outlets to Filter
# Origins and Dimensions
SedOutletCoupling1_Origin(N) := [
    Plant_Origin[0] - L_Sed + W_SedInletChannel + T_SedWeir + S_Fitting + ConRadius(ND_FiEntrancePipe);
    Plant_Origin[1] - T_PlantWall + (W_SedBay*N_SedBays + T_PlantWall)*N_SedTanks - ConRadius(ND_FiEntrancePipe) - S_Fitting - (N - 1)*(W_Sed + T_PlantWall);
    Z_SedChannelBottom - SocketDepth(ND_FiEntrancePipe)
]
SedOutletVertPipe_Origin(N) := SedOutletCoupling1_Origin(N) + [0; 0; 2*SocketDepth(ND_FiEntrancePipe) - CouplingLength(ND_FiEntrancePipe)]
L_SedOutletVertPipe := 2*SocketDepth(ND_FiEntrancePipe) + max(0, T_ChannelWall - CouplingLength(ND_FiEntrancePipe))
SedOutletElbow_Origin(N) := SedOutletVertPipe_Origin(N) - [0; 0; L_SedOutletVertPipe]
SedOutletCoupling2_Origin(N) := [
    Plant_Origin[0] - T_PlantWall - L_Sed + CouplingLength(ND_FiEntrancePipe) - SocketDepth(ND_FiEntrancePipe);
    SedOutletElbow_Origin(N)[1];
    -ElbowRadius(ND_FiEntrancePipe) + SedOutletElbow_Origin(N)[2]
]
SedOutletHorizPipe_Origin(N) := [-ElbowRadius(ND_FiEntrancePipe); 0; -ElbowRadius(ND_FiEntrancePipe)] + SedOutletElbow_Origin(N)
# Sed Outlet Fittings
SedOutletCoupling1Script :=
    Local ← SelectSedFittings
    for i ∈ 1 .. N_FiEntrancePipes
        OutletCoupling ← CouplingSUBF(SedOutletCoupling1_Origin(i), [0; 270]*deg, ND_FiEntrancePipe, PS_Default, ["SedTankCon"])
        Local ← stack(Local, OutletCoupling)
    Local ← stack(Local, SedFittingFrz)
    return Local
SedOutletElbowScript :=
    Local ← SelectSedFittings
    for i ∈ 1 .. N_FiEntrancePipes
        OutletElbow ← ElbowSUBF(SedOutletElbow_Origin(i), [0; 0; 270]*deg, ND_FiEntrancePipe, PS_Default, ["SedTankCon"])
        Local ← stack(Local, OutletElbow)
    Local ← stack(Local, SedFittingFrz)
    return Local
SedOutletCoupling2Script :=
    Local ← SelectSedFittings
    for i ∈ 1 .. N_FiEntrancePipes
        OutletCoupling ← CouplingSUBF(SedOutletCoupling2_Origin(i), [0; 0]*deg, ND_FiEntrancePipe, PS_Default, ["SedTankCon"])
        Local ← stack(Local, OutletCoupling)
    Local ← stack(Local, SedFittingFrz)
    return Local
# Sed Outlet Pipes
SedOutletVertPipeScript :=
    Local ← SelectSedPipes
    for i ∈ 1 .. N_FiEntrancePipes
        OutletPipe ← PipeSUBF(SedOutletVertPipe_Origin(i), L_SedOutletVertPipe, [0; 270]*deg, ND_FiEntrancePipe, PS_Default, ["SedTankCon"])
        Local ← stack(Local, OutletPipe)
    Local ← stack(Local, SedPipeFrz)
    return Local
SedOutletHorizPipeScript :=
    Local ← SelectSedPipes
    for i ∈ 1 .. N_FiEntrancePipes
        OutletPipe ← PipeSUBF(SedOutletHorizPipe_Origin(i), SedOutletElbow_Origin(i)[0] - ElbowRadius(ND_FiEntrancePipe) - (Plant_Origin[0] - T_PlantWall - L_Sed + CouplingLength(ND_FiEntrancePipe) - SocketDepth(ND_FiEntrancePipe)), [0; 0]*deg, ND_FiEntrancePipe, PS_Default, ["SedTankCon"])
        Local ← stack(Local, OutletPipe)
    Local ← stack(Local, SedPipeFrz)
    return Local
# Cut Channel Weir for > 1 Outlet Pipe
SedChannelWeirCutScript :=
    Local ← SelectSedCon
    for i ∈ 2 .. N_FiEntrancePipes
        TopWall ← BoxF([
            Plant_Origin[0] - L_Sed + W_SedInletChannel + T_SedWeir + W_SedExitChannelPostWeir;
            SedOutletCoupling1_Origin(i)[1] + ConRadius(ND_FiEntrancePipe);
            Z_SedChannelBottom
        ], [
            Plant_Origin[0] - L_Sed + W_SedInletChannel + T_SedWeir + W_SedExitChannel;
            SedOutletCoupling1_Origin(i)[1] + ConRadius(ND_FiEntrancePipe) + T_SedWeir;
            Z_SedChannelBottom + H_SedWeirExit
        ], [0; 0; 0]*deg)
        BottomWall ← BoxF([
            Plant_Origin[0] - L_Sed + W_SedInletChannel + T_SedWeir + W_SedExitChannelPostWeir;
            SedOutletCoupling1_Origin(i)[1] - ConRadius(ND_FiEntrancePipe);
            Z_SedChannelBottom
        ], [
            Plant_Origin[0] - L_Sed + W_SedInletChannel + T_SedWeir + W_SedExitChannel;
            SedOutletCoupling1_Origin(i)[1] - ConRadius(ND_FiEntrancePipe) - T_SedWeir;
            Z_SedChannelBottom + H_SedWeirExit
        ], [0; 0; 0]*deg)
        Local ← stack(Local, TopWall, BottomWall)
    Local ← stack(Local, Union_All, FreezeSedTank)
    for i ∈ 2 .. N_FiEntrancePipes
        WeirCutout ← BoxF([
            Plant_Origin[0] - L_Sed + W_SedInletChannel + T_SedWeir + W_SedExitChannelPostWeir;
            SedOutletCoupling1_Origin(i)[1] + ConRadius(ND_FiEntrancePipe);
            Z_SedChannelBottom
        ], [
            Plant_Origin[0] - L_Sed + W_SedInletChannel + 2*T_SedWeir + W_SedExitChannelPostWeir;
            SedOutletCoupling1_Origin(i)[1] - ConRadius(ND_FiEntrancePipe);
            Z_SedChannelBottom + H_SedWeirExit
        ], [0; 0; 0]*deg)
        Local ← stack(Local, WeirCutout)
    Local ← stack(Local, GroupDelete, SubtractSedConCutouts)
    return Local
SedOutletScript :=
    stack(SedOutletCoupling1Script, SedOutletElbowScript, SedOutletCoupling2Script, SedOutletVertPipeScript, SedOutletHorizPipeScript) if N_FiEntrancePipes == 1
    stack(SedOutletCoupling1Script, SedOutletElbowScript, SedOutletCoupling2Script, SedOutletVertPipeScript, SedOutletHorizPipeScript, SedChannelWeirCutScript) otherwise
# Add Water Levels
SedWaterLayer := layer_new("SedWater", blue2)
SedWaterBox := BoxF(Plant_Origin, [-L_SedUpflow; W_Sed; HW_Sed] + Plant_Origin, [0; 0; 0]*deg)
SedIChannelWater := BoxF([Plant_Origin[0] - L_Sed; Plant_Origin[1]; Z_SedChannelBottom], [Plant_Origin[0] - L_Sed; Plant_Origin[1]; Z_SedChannelBottom] + [W_SedInletChannelPreWeir + T_SedWeir + W_SedInletChannelPostWeir; W_Sed; HW_SedInletChannel], [0; 0; 0]*deg)
SedEChannelWater := BoxF([
    Plant_Origin[0] - L_Sed + W_SedInletChannel + 2*T_SedWeir + W_SedExitChannelPostWeir;
    Plant_Origin[1];
    Z_SedChannelBottom
], [
    Plant_Origin[0] - L_Sed + W_SedInletChannel + T_SedWeir + W_SedExitChannel;
    Plant_Origin[1] + W_Sed;
    Z_SedChannelBottom + HW_SedExitChannel
], [0; 0; 0]*deg)
SedWaterFrz := FreezeLayer("SedWater")
SedWaterScript := stack(SedWaterLayer, SedWaterBox, SedIChannelWater, SedEChannelWater, SedWaterFrz)
AC_SedTankWater := stack(SedConScript, SedDrainCoverScript, SedManifoldScript, SedLaunderStartScript, SedHopperDrainStartScript, SedSludgeDrainStartScript, ArraySedBayScript, SedLamellaScript, SedSkimmerScript, SedHopperViewerScript, SedHopperDrainFinishScript, SedSludgeDrainFinishScript, SedManFinishScript, SedLaunderFinishScript, SedTankArrayScript, SedFlocWeirScript, SedDiffuserScript, FinishSedChannelScript, SedInletDrainScript, SedOutletScript, SedWaterScript)
AC_SedTank := stack(SedConScript, SedDrainCoverScript, SedManifoldScript, SedLaunderStartScript, SedHopperDrainStartScript, SedSludgeDrainStartScript, ArraySedBayScript, SedLamellaScript, SedSkimmerScript, SedHopperViewerScript, SedHopperDrainFinishScript, SedSludgeDrainFinishScript, SedManFinishScript, SedLaunderFinishScript, SedTankArrayScript, SedFlocWeirScript, SedDiffuserScript, FinishSedChannelScript, SedInletDrainScript, SedOutletScript)
AC_SedTank :=
    AC_SedTank if EN_Water == 0
    AC_SedTankWater otherwise
