# Sedimentation Tank Drawing
Mod := 0
# Layers
SedTankLayer := layer_new("SedTankCon", grey)
SelectSedTank := SelectLayer("SedTankCon")
SedTankFrz := FreezeLayer("SedTankCon")
SubtractFromSedTank := SubtractF(["SedTankCon"], "DeleteMe")
SedFittingLayer := layer_new("SedFittingPlu", green)
SelectSedFittings := SelectLayer("SedFittingPlu")
SedFittingFrz := FreezeLayer("SedFittingPlu")
SubtractFromSedFittings := SubtractF(["SedFittingPlu"], "DeleteMe")
SedPipeLayer := layer_new("SedPipePlu", blue)
SelectSedPipes := SelectLayer("SedPipePlu")
SedPipeFrz := FreezeLayer("SedPipePlu")
SubtractFromSedPipes := SubtractF(["SedPipePlu"], "DeleteMe")
SedValveLayer := layer_new("SedValvePlu", blue3)
SelectSedValves := SelectLayer("SedValvePlu")
SedValveFrz := FreezeLayer("SedValvePlu")
SedAdapterLayer := layer_new("SedAdapterPlu", blue2)
SelectSedAdapters := SelectLayer("SedAdapterPlu")
SedAdapterFrz := FreezeLayer("SedAdapterPlu")
SedJetReverserLayer := layer_new("SedJetReverserPlu", blue)
SelectSedJetReverser := SelectLayer("SedJetReverserPlu")
SedJetReverserFrz := FreezeLayer("SedJetReverserPlu")
SubtractFromSedJetReverser := SubtractF(["SedJetReverserPlu"], "DeleteMe")
SedInletRemovables := layer_new("SedInletRemovablesPlu", red)
SelectSedInletRemovables := SelectLayer("SedInletRemovablesPlu")
SedInletRemovablesFrz := FreezeLayer("SedInletRemovablesPlu")
SedFerncoLayer := layer_new("SedFerncoPlu", purple)
SelectSedFerncos := SelectLayer("SedFerncoPlu")
SedFerncoFrz := FreezeLayer("SedFerncoPlu")
SedLaunderRemovableLayer := layer_new("SedLaunderRemovablePlu", red)
SelectLaunderSedRemovables := SelectLayer("SedLaunderRemovablePlu")
SedLaunderRemovableFrz := FreezeLayer("SedLaunderRemovablePlu")
SedModPipeLayer := layer_new("SedModPipePlu", blue3)
SelectSedModPipe := SelectLayer("SedModPipePlu")
SedModPipeFrz := FreezeLayer("SedModPipePlu")
SedModSpacerLayer := layer_new("SedModSpacerPlu", blue)
SelectSedModSpacer := SelectLayer("SedModSpacerPlu")
SedModSpacerFrz := FreezeLayer("SedModSpacerPlu")
SedLamellaLayer := layer_new("SedModLamella", purple)
SelectSedLamella := SelectLayer("SedModLamella")
SedLamellaFrz := FreezeLayer("SedModLamella")
SedModCapLayer := layer_new("SedModCapPlu", green)
SelectSedModCap := SelectLayer("SedModCapPlu")
SedModCapFrz := FreezeLayer("SedModCapPlu")
SedPlateFrameFittingLayer := layer_new("SedPlateFrameFittingPlu", green)
SelectSedPlateFrameFitting := SelectLayer("SedPlateFrameFittingPlu")
SedPlateFrameFittingFrz := FreezeLayer("SedPlateFrameFittingPlu")
SedPlateFramePipeLayer := layer_new("SedPlateFramePipePlu", blue)
SelectSedPlateFramePipe := SelectLayer("SedPlateFramePipePlu")
SedPlateFramePipeFrz := FreezeLayer("SedPlateFramePipePlu")
SedDiffuserLayer := layer_new("SedManDiffuserPlu", blue)
SelectSedDiffuser := SelectLayer("SedManDiffuserPlu")
SedDiffuserFreeze := FreezeLayer("SedManDiffuserPlu")
SubtractFromSedDiffuser := SubtractF(["SedManDiffuserPlu"], "DeleteMe")
SedInletDrainRemovables := layer_new("SedInletDrainRemovables", red)
SedInletDrainRemovablesSelect := SelectLayer("SedInletDrainRemovables")
SedInletDrainRemovablesFrz := FreezeLayer("SedInletDrainRemovables")
SedToFiPipeLayer := layer_new("SedToFiPipePlu", blue)
SelectSedToFitPipe := SelectLayer("SedToFiPipePlu")
SedToFiPipeFrz := FreezeLayer("SedToFiPipePlu")
SedToFiFittingSplitLayer := layer_new("SedToFiFitSplitPlu", green)
SelectSedToFitFittingSplit := SelectLayer("SedToFiFitSplitPlu")
SedToFiFittingFrzSplit := FreezeLayer("SedToFiFitSplitPlu")
SedToFiPipeSplitLayer := layer_new("SedToFiPipeSplitPlu", blue)
SelectSedToFitPipeSplit := SelectLayer("SedToFiPipeSplitPlu")
SedToFiPipeFrzSplit := FreezeLayer("SedToFiPipeSplitPlu")
SedExitDrainRemovables := layer_new("SedExitDrainRemovables", red)
SedExitDrainRemovablesSelect := SelectLayer("SedExitDrainRemovables")
SedExitDrainRemovablesFrz := FreezeLayer("SedExitDrainRemovables")
# Sedimentation tank masonry
# Tank and side slopes
SedTank := Tank(Plant_Origin + [0 m; 0 m; -OR(ND_SedJetReverser)], [L_Sed; W_Sed; H_Sed], T_SedDividingWall)
SedSlopePolyline := Pline3D([
    [Plant_Origin[0]; Plant_Origin[1] + W_Sed; Plant_Origin[2] - OD(ND_SedJetReverser)] + [0 m; 0 m; 0 m];
    [Plant_Origin[0]; Plant_Origin[1] + W_Sed; Plant_Origin[2] - OD(ND_SedJetReverser)] + [0 m; 0 m; OR(ND_SedJetReverser) + H_SedSideSlopes];
    [Plant_Origin[0]; Plant_Origin[1] + W_Sed; Plant_Origin[2] - OD(ND_SedJetReverser)] + [0 m; -W_Sed/2 + IR(ND_SedJetReverser, PS_SedJetReverser); OR(ND_SedJetReverser)];
    [Plant_Origin[0]; Plant_Origin[1] + W_Sed; Plant_Origin[2] - OD(ND_SedJetReverser)] + [0 m; -W_Sed/2 - IR(ND_SedJetReverser, PS_SedJetReverser); OR(ND_SedJetReverser)];
    [Plant_Origin[0]; Plant_Origin[1] + W_Sed; Plant_Origin[2] - OD(ND_SedJetReverser)] + [0 m; -W_Sed; OR(ND_SedJetReverser) + H_SedSideSlopes];
    [Plant_Origin[0]; Plant_Origin[1] + W_Sed; Plant_Origin[2] - OD(ND_SedJetReverser)] + [0 m; -W_Sed; 0 m];
    [Plant_Origin[0]; Plant_Origin[1] + W_Sed; Plant_Origin[2] - OD(ND_SedJetReverser)] + [0 m; 0 m; 0 m]
])
ExtrudeSedSlopes := ExtrudeLast(-L_SedUpflow)
SedWestWallThicken :=
    BoxF(Plant_Origin + [-L_Sed - T_SedDividingWall; -T_SedWall; -OR(ND_SedJetReverser) - T_SedDividingWall], Plant_Origin + [-L_Sed - T_SedWall; W_Sed + T_SedWall; Z_SedTop], [0; 0; 0]*deg) if T_SedWall > T_SedDividingWall
    view("t") otherwise
SedEastWallThicken :=
    BoxF(Plant_Origin + [T_SedDividingWall; -T_SedWall; -OR(ND_SedJetReverser) - T_SedDividingWall], Plant_Origin + [T_SedWall; W_Sed + T_SedWall; Z_SedTop], [0; 0; 0]*deg) if T_SedWall > T_SedDividingWall
    view("t") otherwise
SedConScript1 := stack(SedTank, SedSlopePolyline, ExtrudeSedSlopes, SedWestWallThicken, SedEastWallThicken)
# Support ledges and floc weir
SedLamellaSupportLedge1 := BoxF(Plant_Origin + [0 m; 0 m; Z_SedLamellaSupportLedge - T_ConcreteMin], Plant_Origin + [-L_SedUpflow; T_ConcreteMin; Z_SedLamellaSupportLedge], [0; 0; 0]*deg)
SedLamellaSupportLedge2 := BoxF(Plant_Origin + [0 m; W_Sed; Z_SedLamellaSupportLedge - T_ConcreteMin], Plant_Origin + [-L_SedUpflow; W_Sed - T_ConcreteMin; Z_SedLamellaSupportLedge], [0; 0; 0]*deg)
SedLaunderLedge := BoxF([0; W_Sed - 1/2*W_Sed + OR_Fitting(ND_SedLaunder); Z_SedLaunder - OR_Fitting(ND_SedLaunder)] + Plant_Origin, [
    -2*SocketDepth(ND_SedLaunder);
    W_Sed - 1/2*W_Sed - OR_Fitting(ND_SedLaunder);
    Z_SedLaunder - OR_Fitting(ND_SedLaunder) - T_ConcreteMin
] + Plant_Origin, [0; 0; 0]*deg)
SedFlocWeir := BoxF([Plant_Origin[0] - L_SedUpflow - T_SedWeir; Plant_Origin[1] - zc; Plant_Origin[2] + Z_SedFlocWeir], [
    Plant_Origin[0] - L_SedUpflow;
    Plant_Origin[1] + W_Sed + zc;
    Plant_Origin[2] - OD(ND_SedJetReverser)
], [0; 0; 0]*deg)
SedConScript2 := stack(SedLamellaSupportLedge1, SedLamellaSupportLedge2, SedLaunderLedge, SedFlocWeir)
# Inlet and exit channels
ChannelVertBox := BoxF([-L_Sed + W_SedInletChannel + W_SedExitChannel + T_SedWeir; W_Sed; Z_SedChannelBottom] + Plant_Origin, [-L_Sed + W_SedInletChannel + W_SedExitChannel + T_SedWeir + T_SedChannelWall; 0 m; Z_SedTop] + Plant_Origin, [0; 0; 0]*deg)
ChannelHorizBox := BoxF([-L_Sed; W_Sed; Z_SedChannelBottom] + Plant_Origin, [
    -L_Sed + W_SedExitChannel + T_SedWeir + W_SedInletChannel + T_SedChannelWall;
    0 m;
    Z_SedChannelBottom - T_SedChannelWall
] + Plant_Origin, [0; 0; 0]*deg)
ChannelWallCutout1 := BoxF(Plant_Origin + [-L_Sed + W_SedInletChannel + T_SedWeir + W_SedExitChannel; W_Sed; Z_SedChannelBottom], Plant_Origin + [-L_Sed; W_Sed + T_SedDividingWall; Z_SedTop], [0; 0; 0]*deg)
ChannelWallCutout2 := BoxF(Plant_Origin + [-L_Sed + W_SedInletChannel + T_SedWeir + W_SedExitChannel; 0 m; Z_SedChannelBottom], Plant_Origin + [-L_Sed; -T_SedDividingWall; Z_SedTop], [0; 0; 0]*deg)
SedChannelScript := stack(ChannelVertBox, ChannelHorizBox)
# Floc hopper slopes
SedHopperFrontBackPline := Pline3D([
    [Plant_Origin[0] - L_Sed; Plant_Origin[1]; Plant_Origin[2] - OD(ND_SedJetReverser)];
    [Plant_Origin[0] - L_Sed + L_SedHopper; Plant_Origin[1]; Plant_Origin[2] - OD(ND_SedJetReverser)];
    [
        Plant_Origin[0] - L_Sed + L_SedHopper;
        Plant_Origin[1];
        Plant_Origin[2] + Z_SedHopperBottom + H_SedHopperFrontSlope
    ];
    [Plant_Origin[0] + X_SedHopperBottom; Plant_Origin[1]; Plant_Origin[2] + Z_SedHopperBottom];
    [
        Plant_Origin[0] - L_Sed;
        Plant_Origin[1];
        Plant_Origin[2] + Z_SedHopperBottom + H_SedHopperBackSlope
    ];
    [Plant_Origin[0] - L_Sed; Plant_Origin[1]; Plant_Origin[2] - OD(ND_SedJetReverser)]
])
ExtrudeSedHopperFrontBack := ExtrudeLast(-W_Sed)
SedHopperSidePline := Pline3D([
    [Plant_Origin[0] - L_SedUpflow - T_SedWeir; Plant_Origin[1]; Plant_Origin[2]] + [0 m; 0 m; -OD(ND_SedJetReverser)];
    [Plant_Origin[0] - L_SedUpflow - T_SedWeir; Plant_Origin[1]; Plant_Origin[2]] + [0 m; W_Sed; -OD(ND_SedJetReverser)];
    [Plant_Origin[0] - L_SedUpflow - T_SedWeir; Plant_Origin[1]; Plant_Origin[2]] + [0 m; W_Sed; Z_SedHopperSideSlope];
    [Plant_Origin[0] - L_SedUpflow - T_SedWeir; Plant_Origin[1]; Plant_Origin[2]] + [0 m; 3*S_Fitting + OD_Fitting(ND_SedChannelDrain) + OD(ND_SedHopperDrain); Z_SedHopperBottom];
    [Plant_Origin[0] - L_SedUpflow - T_SedWeir; Plant_Origin[1]; Plant_Origin[2]] + [0 m; 3*S_Fitting + OD_Fitting(ND_SedChannelDrain); Z_SedHopperBottom];
    [Plant_Origin[0] - L_SedUpflow - T_SedWeir; Plant_Origin[1]; Plant_Origin[2]] + [0 m; 0 m; Z_SedHopperSideSlope];
    [Plant_Origin[0] - L_SedUpflow - T_SedWeir; Plant_Origin[1]; Plant_Origin[2]] + [0 m; 0 m; -OD(ND_SedJetReverser)]
])
ExtrudeSedHopperSides := ExtrudeLast(-L_SedHopper)
SedHopperScript := stack(SedHopperFrontBackPline, ExtrudeSedHopperFrontBack, SedHopperSidePline, ExtrudeSedHopperSides)
# West corner wedge
# Note: east corner wedge is drawn after the jet reverser is finished because we don't want the jet reverser to subtract out of it.
SedWestCornerWedge := WedgeF(Plant_Origin + [-L_SedUpflow; 0 m; -OR(ND_SedJetReverser)], Plant_Origin + [
    Plant_Origin[0] - L_SedUpflow + L_FlocWeirToDiffuserGap;
    Plant_Origin[1] + W_Sed;
    Z_SedManifoldPipe - OR_Fitting(ND_SedManifold)
], [0; 0; 0]*deg)
SedConScript := stack(SedTankLayer, SedConScript1, SedConScript2, SedChannelScript, SedHopperScript, SedWestCornerWedge, SedTankFrz, ChannelWallCutout1, ChannelWallCutout2, GroupDelete, SubtractFromSedTank)
# Jet reverser and sludge drain
# Origins and dimensions
SedJetReverser_Origin := Plant_Origin + [0 m; W_Sed/2; -OR(ND_SedJetReverser)]
L_SedJetReverserPipe := L_Sed + T_SedWall + 2*MaleAdapterLength(ND_SedHopperDrain) + ValveLength(ND_SedHopperDrain) + SocketDepth(ND_SedHopperDrain) + ElbowRadius(ND_SedHopperDrain) + OR_Fitting(ND_SedHopperDrain)
SedSludgeDrainAdapter1_Origin := SedJetReverser_Origin + [-L_SedJetReverserPipe; 0 m; 0 m]
SedSludgeDrainAdapter2_Origin := SedSludgeDrainAdapter1_Origin + [
    -2*MaleAdapterLength(ND_SedJetReverser) - ValveLength(ND_SedJetReverser) + 2*SocketDepth(ND_SedJetReverser) + 2*ValveSocket(ND_SedJetReverser);
    0 m;
    0 m
]
SedSludgeDrainValve_Origin := SedSludgeDrainAdapter1_Origin + [
    -MaleAdapterLength(ND_SedJetReverser) + SocketDepth(ND_SedJetReverser) + ValveSocket(ND_SedJetReverser);
    0 m;
    0 m
]
SedSludgeDrainElbow_Origin := SedSludgeDrainAdapter2_Origin + [-2*SocketDepth(ND_SedJetReverser); 0 m; 0 m]
# Jet reverser pipe
SedJetReverser := PipeSUBF(SedJetReverser_Origin, L_SedJetReverserPipe, [0; 0]*deg, ND_SedJetReverser, PS_SedJetReverser, ["SedTankCon"])
SedJetReverserCut := BoxF(SedJetReverser_Origin + [0 m; -OR(ND_SedJetReverser); 0 m], SedJetReverser_Origin + [
    -L_SedUpflow + L_FlocWeirToDiffuserGap - L_FlocWeirToDiffuserGap/(Z_SedManifoldPipe - OR_Fitting(ND_SedManifold) + OR(ND_SedJetReverser))*OR(ND_SedJetReverser);
    OR(ND_SedJetReverser);
    OR(ND_SedJetReverser)
], [0; 0; 0]*deg)
SedJetReverserScript := stack(SedJetReverserLayer, SedJetReverser, SedJetReverserFrz, SedJetReverserCut, GroupDelete, SubtractFromSedJetReverser)
# Sludge drain fittings
SedSludgeDrainAdapter1 := MaleAdapterF(SedSludgeDrainAdapter1_Origin, [0; 0]*deg, ND_SedJetReverser, PS_SedJetReverser)
SedSludgeDrainAdapter2 := MaleAdapterF(SedSludgeDrainAdapter2_Origin, [180; 0]*deg, ND_SedJetReverser, PS_SedJetReverser)
SedSludgeDrainValve := insertdwg(SedGateValveURL, SedSludgeDrainValve_Origin, 2*OR(ND_SedJetReverser)/(1.16 m), 2*OR(ND_SedJetReverser)/(1.16 m), 0 deg)
SedSludgeDrainElbow := ElbowF(SedSludgeDrainElbow_Origin, [90; 0; 45]*deg, ND_SedJetReverser, PS_SedJetReverser)
SedSludgeDrainNipple := PipeF(SedSludgeDrainAdapter2_Origin, 2*SocketDepth(ND_SedJetReverser), [0; 0]*deg, ND_SedJetReverser, PS_SedJetReverser)
SedSludgeDrainFittingScript := stack(SedAdapterLayer, SedSludgeDrainAdapter1, SedSludgeDrainAdapter2, SedAdapterFrz, SedValveLayer, SedSludgeDrainValve, SedValveFrz, SedFittingLayer, SedSludgeDrainElbow, SedFittingFrz, SedPipeLayer, SedSludgeDrainNipple, SedPipeFrz)
SedSludgeDrainScript := stack(SedJetReverserScript, SedSludgeDrainFittingScript)
# Origins and dimensions
SedManHorizPipe1_Origin := [
    Plant_Origin[0] - L_SedUpflow + L_SedManConnectionStub - 1 mm;
    Plant_Origin[1] + W_Sed/2 + L_SedManifoldOffset;
    Z_SedManifoldPipe
]  # Subtracted 1mm so that there would be a visible space between the two horizontal pipes to show that they are separate
L_SedManHorizPipe1 := L_SedHopper + T_SedWeir + L_SedManConnectionStub - S_Fitting - OR_Fitting(ND_SedManifold) - ElbowRadius(ND_SedManifold) - 1 mm
SedManHorizPipe2_Origin := [
    Plant_Origin[0] - CapThickness(ND_SedManifold) - L_SedManifoldPipeFromTankEnd;
    Plant_Origin[1] + W_Sed/2 + L_SedManifoldOffset;
    Z_SedManifoldPipe
]
L_SedManHorizPipe2 := L_SedUpflow - L_SedManConnectionStub - L_SedManifoldPipeFromTankEnd - CapThickness(ND_SedManifold)
SedManElbow_Origin := SedManHorizPipe1_Origin + [-L_SedManHorizPipe1; 0 m; 0 m]
SedManCap_Origin := SedManHorizPipe2_Origin
# Manifold pipes
SedManHorizPipe1 := PipeSUBF(SedManHorizPipe1_Origin, L_SedManHorizPipe1, [0; 0]*deg, ND_SedManifold, PS_SedMan, ["SedTankCon"])
SedManHorizPipe2 := PipeF(SedManHorizPipe2_Origin, L_SedManHorizPipe2, [0; 0]*deg, ND_SedManifold, PS_SedMan)
SedManPipeScript := stack(SelectSedPipes, SedManHorizPipe1, SedManHorizPipe2, SedPipeFrz)
# Manifold fittings
SedManElbow := ElbowSUBF(SedManElbow_Origin, [90; 0; 270]*deg, ND_SedManifold, PS_SedMan, ["SedTankCon"])
SedManCap := CapF(SedManCap_Origin, [0; 0; 0]*deg, ND_SedManifold)
SedManFernco := FerncoCouplingF(SedManHorizPipe1_Origin + [L_SedManFirstDiffuserGap + 1 mm; 0 m; 0 m], [0; 0; 0]*deg, ND_SedManifold, L_SedManConnectionStub + L_SedManFirstDiffuserGap)
SedManFittingScript := stack(SelectSedFittings, SedManCap, SedManElbow, SedFittingFrz, SedFerncoLayer, SedManFernco, SedFerncoFrz)
# Manifold orifices
SedManOrifice := CylinderF(SedManHorizPipe2_Origin + [-L_SedManHorizPipe2 + L_SedManFirstDiffuserGap + OR(ND_SedDiffuser); 0 m; 0 m], OR(ND_SedDiffuser), OR(ND_SedManifold) + zc, [0; 270]*deg)
ArraySedManOrifice := array_all(1, N_SedManifoldPorts, B_SedDiffuser)
SedManOrificeScript := stack(SedManOrifice, ArraySedManOrifice, GroupDelete, SubtractFromSedPipes, SedManOrifice, ArraySedManOrifice, GroupDelete, SubtractFromSedFittings)
# Air vent holes (not currently stacked)
SedManAirVent := CylinderF([
    Plant_Origin[0] - (N_SedAirVents*B_AirVentHoles + L_SedManifoldPipeFromTankEnd + L_SedDiffusersToEnd + CapThickness(ND_SedManifold));
    SedManPipe_Origin[1];
    SedManPipe_Origin[2] + OR(ND_SedManifold) + ND_SedManifold/4
], D_AirVentHoles/2, ND_SedManifold/2, [0; 270]*deg)
ArraySedManAirVent := array_all(1, N_SedAirVents, B_AirVentHoles)
SedManifoldScript := stack(SedManPipeScript, SedManFittingScript, SedManOrificeScript)
# Inlet manifold
# Exit launder
# Origins and dimensions
SedLaunderPipe_Origin :=
    if T_SedChannelWall > CouplingLength(ND_SedLaunder)
        [
            Plant_Origin[0] - L_SedUpflow + max(0 m, 2*CouplingLength(ND_SedLaunder) - T_SedChannelWall) - SocketDepth(ND_SedLaunder);
            Plant_Origin[1] + 1/2*W_Sed;
            Plant_Origin[2] + Z_SedLaunder
        ]
    otherwise
        [
            Plant_Origin[0] - L_SedUpflow - T_SedChannelWall + CouplingLength(ND_SedLaunder) - SocketDepth(ND_SedLaunder);
            Plant_Origin[1] + W_Sed/2;
            Plant_Origin[2] + Z_SedLaunder
        ]
SedLaunderCap_Origin := SedLaunderPipe_Origin + [L_SedLaunder; 0 m; 0 m]
SedLaunderCoupling1_Origin := [
    Plant_Origin[0] - L_Sed + W_SedExitChannel + W_SedInletChannel + T_SedWeir + SocketDepth(ND_SedLaunder) - 0.0001 m;
    Plant_Origin[1] + W_Sed/2;
    Plant_Origin[2] + Z_SedLaunder
]
SedLaunderCoupling2_Origin := [
    Plant_Origin[0] - L_SedUpflow + max(0 m, 2*CouplingLength(ND_SedLaunder) - T_SedChannelWall) - SocketDepth(ND_SedLaunder);
    Plant_Origin[1] + W_Sed/2;
    Plant_Origin[2] + Z_SedLaunder
]
SedLaunderNipple_Origin := SedLaunderCoupling1_Origin + [CouplingLength(ND_SedLaunder) - 2*SocketDepth(ND_SedLaunder); 0 m; 0 m]
SedLaunderPlugCap_Origin := [
    Plant_Origin[0] - L_SedUpflow - T_SedChannelWall - CapHeight(ND_SedLaunder) + CapThickness(ND_SedLaunder);
    Plant_Origin[1] + W_Sed/2;
    Plant_Origin[2] + Z_SedLaunder
]
# Launder fittings
SedLaunderEndCap := CapF(SedLaunderCap_Origin, [0; 0]*deg, ND_SedLaunder)
SedLaunderPlugCap := CapF(SedLaunderPlugCap_Origin, [180; 0]*deg, ND_SedLaunder)
SedLaunderCoupling1 := CouplingSUBF(SedLaunderCoupling1_Origin, [0; 180]*deg, ND_SedLaunder, PS_SedLaunder, ["SedTankCon"])
SedLaunderCoupling2 := CouplingSUBF(SedLaunderCoupling2_Origin, [0; 0]*deg, ND_SedLaunder, PS_SedLaunder, ["SedTankCon"])
SedLaunderFittingScript :=
    stack(SelectSedFittings, SedLaunderEndCap, SedLaunderCoupling1, SedFittingFrz, SedLaunderRemovableLayer, SedLaunderPlugCap, SedLaunderRemovableFrz) if CouplingLength(ND_SedLaunder) ≥ T_SedChannelWall
    stack(SelectSedFittings, SedLaunderEndCap, SedLaunderCoupling1, SedLaunderCoupling2, SedFittingFrz, SedLaunderRemovableLayer, SedLaunderPlugCap, SedLaunderRemovableFrz) otherwise
# Launder pipes
SedLaunderPipe := PipeF(SedLaunderPipe_Origin, L_SedLaunder, [0; 180]*deg, ND_SedLaunder, PS_SedLaunder)
SedLaunderPlugNipple := PipeF(SedLaunderPlugCap_Origin, CapHeight(ND_SedLaunder) - CapThickness(ND_SedLaunder) + L_SedLaunderCapExcess, [180; 0]*deg, ND_SedLaunder, PS_SedLaunder)
SedLaunderNipple := PipeSUBF(SedLaunderNipple_Origin, T_SedChannelWall - 2*CouplingLength(ND_SedLaunder) + 2*SocketDepth(ND_SedLaunder), [0; 180]*deg, ND_SedLaunder, PS_SedLaunder, ["SedTankCon"])
SedLaunderPipeScript :=
    stack(SelectSedPipes, SedLaunderPipe, SedPipeFrz, SelectLaunderSedRemovables, SedLaunderPlugNipple, SedLaunderRemovableFrz) if CouplingLength(ND_SedLaunder) ≥ T_SedChannelWall
    stack(SelectSedPipes, SedLaunderPipe, SedLaunderNipple, SedPipeFrz, SelectLaunderSedRemovables, SedLaunderPlugNipple, SedLaunderRemovableFrz) otherwise
# Launder orifices
SedLaunderOrifice := CylinderF([SocketDepth(ND_SedLaunder) + 1/2*B_SedLaunderOrifice; 0 m; 0 m] + SedLaunderPipe_Origin, D_SedLaunderOrifice/2, OR(ND_SedLaunder) + zc, [0; 90]*deg)
ArraySedLaunderOrifices := array_all(1, N_SedLaunderOrifices, B_SedLaunderOrifice)
SedLaunderOrificeScript := stack(SedLaunderOrifice, ArraySedLaunderOrifices, GroupDelete, SubtractFromSedPipes, SedLaunderOrifice, ArraySedLaunderOrifices, GroupDelete, SubtractFromSedFittings)
SedLaunderScript := stack(SedLaunderFittingScript, SedLaunderPipeScript, SedLaunderOrificeScript)
# Floc hopper drain
PS_SedHopperDrain := SDR_26
PS_SedHopperDrainStr := PSToString(PS_SedHopperDrain)
# Origins
SedHopperDrainAdapter1_Origin := Plant_Origin + [
    -L_Sed - T_SedWall - SocketDepth(ND_SedHopperDrain);
    3*S_Fitting + OD_Fitting(ND_SedChannelDrain) + OR(ND_SedHopperDrain);
    Z_SedHopperBottom + OR(ND_SedHopperDrain)
]
SedHopperDrainTee1_Origin := Plant_Origin + [
    -L_Sed - T_SedWall - SocketDepth(ND_SedHopperDrain) - TeeLength(ND_SedHopperDrain)/2;
    3*S_Fitting + OD_Fitting(ND_SedChannelDrain) + OR(ND_SedHopperDrain);
    Z_SedHopperBottom + OR(ND_SedHopperDrain) + ShortTeeLength(ND_SedHopperDrain)
]
SedHopperDrainValve_Origin := SedHopperDrainTee1_Origin + [
    -TeeLength(ND_SedHopperDrain)/2 - SocketDepth(ND_SedHopperDrain);
    0 m;
    -ShortTeeLength(ND_SedHopperDrain)
]
SedHopperDrainValve2_Origin := [
    SedHopperDrainValve_Origin[0];
    SedHopperDrainValve_Origin[1];
    Z_Walkway - 2*S_Fitting - OR_Fitting(ND_SedHopperDrain) - T_PlantFloor
]
SedHopperDrainElbow2_Origin := [
    SedHopperDrainTee1_Origin[0];
    SedHopperDrainTee1_Origin[1];
    SedHopperDrainValve2_Origin[2] - ElbowRadius(ND_SedHopperDrain)
]
SedHopperDrainAdapter2_Origin := SedHopperDrainValve_Origin + [
    ValveSocket(ND_SedHopperDrain) - ValveLength(ND_SedHopperDrain) + SocketDepth(ND_SedHopperDrain) - MaleAdapterLength(ND_SedHopperDrain);
    0 m;
    0 m
]
SedHopperDrainAdapter3_Origin := [
    SedHopperDrainAdapter2_Origin[0];
    SedHopperDrainAdapter2_Origin[1];
    Z_Walkway - 2*S_Fitting - OR_Fitting(ND_SedHopperDrain) - T_PlantFloor
]
SedHopperDrainElbow_Origin := SedHopperDrainAdapter2_Origin + [-2*SocketDepth(ND_SedHopperDrain); 0 m; 0 m]
SedHopperDrainElbow3_Origin := [
    SedHopperDrainElbow_Origin[0];
    SedHopperDrainElbow_Origin[1];
    Z_Walkway - 2*S_Fitting - OR_Fitting(ND_SedHopperDrain) - T_PlantFloor
]
SedHopperDrainPipe_Origin := [
    Plant_Origin[0] - L_SedUpflow - T_SedWeir - L_SedHopper/2;
    SedHopperDrainValve_Origin[1];
    SedHopperDrainValve_Origin[2]
]
# Hopper drain pipes
SedHopperDrainNipple1 := PipeF(SedHopperDrainAdapter1_Origin + [2*SocketDepth(ND_SedHopperDrain); 0; 0], 2*SocketDepth(ND_SedHopperDrain), [0; 0]*deg, ND_SedHopperDrain, PS_SedHopperDrain)
SedHopperDrainNipple2 := PipeF(SedHopperDrainAdapter2_Origin, 2*SocketDepth(ND_SedHopperDrain), [0; 0]*deg, ND_SedHopperDrain, PS_SedHopperDrain)
2*SocketDepth(ND_SedHopperDrain) =  # error: This variable is undefined.
SedHopperDrainNipple3 := PipeF(SedHopperDrainAdapter3_Origin, 2*SocketDepth(ND_SedHopperDrain), [0; 0]*deg, ND_SedHopperDrain, PS_SedHopperDrain)
SedHopperDrainNipple4 := PipeF(SedHopperDrainValve_Origin + [-ValveSocket(ND_SedHopperDrain); 0; 0], SocketDepth(ND_SedHopperDrain) + ValveSocket(ND_SedHopperDrain), [180; 0]*deg, ND_SedHopperDrain, PS_SedHopperDrain)
SedHopperDrainNipple5 := PipeF(SedHopperDrainElbow2_Origin + [-ElbowRadius(ND_SedHopperDrain); 0; ElbowRadius(ND_SedHopperDrain)], SedHopperDrainElbow2_Origin[0] - SedHopperDrainValve2_Origin[0] - ElbowRadius(ND_SedHopperDrain) + ValveSocket(ND_SedHopperDrain), [0; 0]*deg, ND_SedHopperDrain, PS_SedHopperDrain)
L_SedHopperDrainPipe := L_SedHopper/2 + T_SedWall + SocketDepth(ND_SedHopperDrain)
SedHopperDrainPipe := PipeSUBF(SedHopperDrainPipe_Origin, L_SedHopperDrainPipe, [0; 0]*deg, ND_SedHopperDrain, PS_SedHopperDrain, ["SedTankCon"])
SedHopperDrainPipe2 := PipeSUBF(SedHopperDrainTee1_Origin, SedHopperDrainElbow2_Origin[2] - SedHopperDrainTee1_Origin[2], [0; 90]*deg, ND_SedHopperDrain, PS_SedHopperDrain, ["SedTankCon"])
SedHopperDrainPipeWedge := WedgeF([0; OR(ND_SedHopperDrain); OR(ND_SedHopperDrain)] + SedHopperDrainPipe_Origin, [
    -OD(ND_SedHopperDrain)/tan(AN_SedHopperFrontBackSlope);
    -OR(ND_SedHopperDrain);
    -OR(ND_SedHopperDrain)
] + SedHopperDrainPipe_Origin, [0; 0; 0])
SubtractSedHopperDrainPipeWedge := SubtractF(["SedPipePlu"], "DeleteMe")
SedHopperDrainPipeScript := stack(SelectSedPipes, SedHopperDrainNipple1, SedHopperDrainNipple2, SedHopperDrainNipple3, SedHopperDrainNipple4, SedHopperDrainNipple5, SedHopperDrainPipe, SedHopperDrainPipe2, SedPipeFrz, SedHopperDrainPipeWedge, GroupDelete, SubtractSedHopperDrainPipeWedge)
# Hopper drain fittings
SedHopperDrainTee1 := TeeF(SedHopperDrainTee1_Origin, [0; 0; 90]*deg, ND_SedHopperDrain, PS_SedHopperDrain)
SedHopperDrainElbow := ElbowF(SedHopperDrainElbow_Origin, [90; 0; 45]*deg, ND_SedHopperDrain, PS_SedHopperDrain)
SedHopperDrainElbow2 := ElbowF(SedHopperDrainElbow2_Origin, [0; 0; 90]*deg, ND_SedHopperDrain, PS_SedHopperDrain)
SedHopperDrainElbow3 := ElbowF(SedHopperDrainElbow3_Origin, [90; 0; 45]*deg, ND_SedHopperDrain, PS_SedHopperDrain)
SedHopperDrainAdapter1 := MaleAdapterF(SedHopperDrainAdapter1_Origin, [0; 0]*deg, ND_SedHopperDrain, PS_SedHopperDrain)
SedHopperDrainAdapter2 := MaleAdapterF(SedHopperDrainAdapter2_Origin, [180; 0]*deg, ND_SedHopperDrain, PS_SedHopperDrain)
SedHopperDrainAdapter3 := MaleAdapterF(SedHopperDrainAdapter3_Origin, [180; 0]*deg, ND_SedHopperDrain, PS_SedHopperDrain)
SedHopperDrainValve := insertdwg(SedGateValveURL, SedHopperDrainValve_Origin, 2*OR(ND_SedHopperDrain)/(1.16 m), 2*OR(ND_SedHopperDrain)/(1.16 m), 0 deg)
SedHopperDrainValve2 := insertdwg(SedGateValveURL, SedHopperDrainValve2_Origin, 2*OR(ND_SedHopperDrain)/(1.16 m), 2*OR(ND_SedHopperDrain)/(1.16 m), 0 deg)
SedHopperDrainFittingScript := stack(SelectSedValves, SedHopperDrainValve2, SedHopperDrainValve, SedValveFrz, SelectSedAdapters, SedHopperDrainAdapter2, SedHopperDrainAdapter3, SedAdapterFrz, SelectSedFittings, SedHopperDrainElbow, SedHopperDrainElbow2, SedHopperDrainElbow3, SedHopperDrainTee1, SedFittingFrz)
SedHopperDrainScript := stack(SedHopperDrainPipeScript, SedHopperDrainFittingScript)
# Plate settler support frame
PS_SedPlateFrame := SDR_26
PS_SedPlateFrameStr := PSToString(PS_SedPlateFrame)
# Origins
SedFrameCentralTee1_Origin := [
    -OR_Fitting(ND_SedPlateFrame) - ShortTeeLength(ND_SedPlateFrame);
    W_Sed/2 - SocketDepth(ND_SedPlateFrame) - TeeLength(ND_SedPlateFrame)/2;
    Z_SedLamellaSupportLedge + OR_Fitting(ND_SedPlateFrame)
]
SedFrameCentralTee2_Origin := SedFrameCentralTee1_Origin + [-B_SedPlateFrameCross + 2*ShortTeeLength(ND_SedPlateFrame); 0 m; 0 m]
SedFrameCentralTee3_Origin := SedFrameCentralTee1_Origin + [-B_SedPlateFrameCross; 2*SocketDepth(ND_SedPlateFrame) + TeeLength(ND_SedPlateFrame); 0 m]
SedFrameCentralTee4_Origin := SedFrameCentralTee1_Origin + [
    -2*B_SedPlateFrameCross + 2*ShortTeeLength(ND_SedPlateFrame);
    2*SocketDepth(ND_SedPlateFrame) + TeeLength(ND_SedPlateFrame);
    0 m
]
SedFrameElbow1_Origin := [
    -OR_Fitting(ND_SedPlateFrame) - ElbowRadius(ND_SedPlateFrame);
    OR_Fitting(ND_SedPlateFrame);
    Z_SedLamellaSupportLedge + OR_Fitting(ND_SedPlateFrame)
]
SedFrameElbow2_Origin := SedFrameElbow1_Origin + [0 m; W_Sed - OD_Fitting(ND_SedPlateFrame); 0 m]
SedFrameElbow3_Origin := SedFrameElbow1_Origin + [-(N_SedFrameCrossPipe - 1)*B_SedPlateFrameCross + 2*ElbowRadius(ND_SedPlateFrame); 0 m; 0 m]
SedFrameElbow4_Origin := SedFrameElbow2_Origin + [-(N_SedFrameCrossPipe - 1)*B_SedPlateFrameCross + 2*ElbowRadius(ND_SedPlateFrame); 0 m; 0 m]
SedFrameSideTee1_Origin := [
    -OR_Fitting(ND_SedPlateFrame) - B_SedPlateFrameCross;
    OR_Fitting(ND_SedPlateFrame) + ShortTeeLength(ND_SedPlateFrame);
    Z_SedLamellaSupportLedge + OR_Fitting(ND_SedPlateFrame)
]
SedFrameSideTee2_Origin := SedFrameSideTee1_Origin + [0 m; W_Sed - OD_Fitting(ND_SedPlateFrame) - 2*ShortTeeLength(ND_SedPlateFrame); 0 m]
SedFrameInnerCrossPipe1_Origin := [
    -OR_Fitting(ND_SedPlateFrame) - B_SedPlateFrameCross;
    OR_Fitting(ND_SedPlateFrame) + ShortTeeLength(ND_SedPlateFrame);
    Z_SedLamellaSupportLedge + OR_Fitting(ND_SedPlateFrame)
]
L_SedFrameInnerCrossPipe1 := W_Sed/2 - OR_Fitting(ND_SedPlateFrame) - ShortTeeLength(ND_SedPlateFrame) - SocketDepth(ND_SedPlateFrame) - TeeLength(ND_SedPlateFrame)
SedFrameInnerCrossPipe2_Origin := SedFrameInnerCrossPipe1_Origin + [
    0 m;
    W_Sed/2 - OR_Fitting(ND_SedPlateFrame) - ShortTeeLength(ND_SedPlateFrame) - SocketDepth(ND_SedPlateFrame);
    0 m
]
SedFrameInnerCrossPipe3_Origin := SedFrameInnerCrossPipe2_Origin + [0 m; 2*SocketDepth(ND_SedPlateFrame) + TeeLength(ND_SedPlateFrame); 0 m]
SedFrameEndCrossPipe1_Origin := SedFrameCentralTee1_Origin + [ShortTeeLength(ND_SedPlateFrame); -TeeLength(ND_SedPlateFrame)/2; 0 m]
L_SedFrameEndCrossPipe1 := W_Sed/2 - OR_Fitting(ND_SedPlateFrame) - ElbowRadius(ND_SedPlateFrame) - SocketDepth(ND_SedPlateFrame) - TeeLength(ND_SedPlateFrame)
SedFrameEndCrossPipe2_Origin := SedFrameEndCrossPipe1_Origin + [0 m; TeeLength(ND_SedPlateFrame); 0 m]
L_SedFrameEndCrossPipe2 := W_Sed/2 - OR_Fitting(ND_SedPlateFrame) - ElbowRadius(ND_SedPlateFrame) + SocketDepth(ND_SedPlateFrame)
# Plate frame fittings
SedFrameCentralTee1 := TeeF(SedFrameCentralTee1_Origin, [90; 0; 0]*deg, ND_SedPlateFrame, PS_SedPlateFrame)
SedFrameCentralTee2 := TeeF(SedFrameCentralTee2_Origin, [-90; 0; 0]*deg, ND_SedPlateFrame, PS_SedPlateFrame)
ArrayPlateFrameCentralTees_1and2 := ArrayLast(1, floor(N_SedFrameCrossPipe/2), -2*B_SedPlateFrameCross)
SedFrameCentralTee3 := TeeF(SedFrameCentralTee3_Origin, [90; 0; 0]*deg, ND_SedPlateFrame, PS_SedPlateFrame)
SedFrameCentralTee4 := TeeF(SedFrameCentralTee4_Origin, [-90; 0; 0]*deg, ND_SedPlateFrame, PS_SedPlateFrame)
ArrayPlateFrameCentralTees_3and4 := ArrayLast(1, max(floor((N_SedFrameCrossPipe - 1)/2), 1), -2*B_SedPlateFrameCross)
SedPlateFrameCentralTeeScript := stack(SedPlateFrameFittingLayer, SedFrameCentralTee1, ArrayPlateFrameCentralTees_1and2, SedFrameCentralTee2, ArrayPlateFrameCentralTees_1and2, SedFrameCentralTee3, ArrayPlateFrameCentralTees_3and4, SedFrameCentralTee4, ArrayPlateFrameCentralTees_3and4)
SedFrameElbow1 := ElbowF(SedFrameElbow1_Origin, [-90; 0; 0]*deg, ND_SedPlateFrame, PS_SedPlateFrame)
SedFrameElbow2 := ElbowF(SedFrameElbow2_Origin, [-90; 0; 180]*deg, ND_SedPlateFrame, PS_SedPlateFrame)
SedFrameElbow3 := ElbowF(SedFrameElbow3_Origin, [90; 0; 180]*deg, ND_SedPlateFrame, PS_SedPlateFrame)
SedFrameElbow4 := ElbowF(SedFrameElbow4_Origin, [90; 0; 0]*deg, ND_SedPlateFrame, PS_SedPlateFrame)
SedPlateFrameElbowScript := stack(SedFrameElbow1, SedFrameElbow2, SedFrameElbow3, SedFrameElbow4)
SedFrameSideTee1 := TeeF(SedFrameSideTee1_Origin, [0; 0; 0]*deg, ND_SedPlateFrame, PS_SedPlateFrame)
SedFrameSideTee2 := TeeF(SedFrameSideTee2_Origin, [180; 0; 0]*deg, ND_SedPlateFrame, PS_SedPlateFrame)
ArrayPlateFrameSideTee := ArrayLast(1, N_SedFrameCrossPipe - 2, -B_SedPlateFrameCross)
SedPlateFrameSideTeeScript := stack(SedFrameSideTee1, ArrayPlateFrameSideTee, SedFrameSideTee2, ArrayPlateFrameSideTee, SedPlateFrameFittingFrz)
SedPlateFrameFittingScript := stack(SedPlateFrameCentralTeeScript, SedPlateFrameElbowScript, SedPlateFrameSideTeeScript)
# Plate frame pipes
SedFrameCentralPipe1 := PipeF(SedFrameCentralTee1_Origin, B_SedPlateFrameCross - 2*ShortTeeLength(ND_SedPlateFrame), [0; 0]*deg, ND_SedPlateFrame, PS_SedPlateFrame)
SedFrameCentralPipe2 := PipeF(SedFrameCentralTee3_Origin, B_SedPlateFrameCross - 2*ShortTeeLength(ND_SedPlateFrame), [0; 0]*deg, ND_SedPlateFrame, PS_SedPlateFrame)
SedFrameSidePipe1 := PipeF(SedFrameElbow1_Origin, B_SedPlateFrameCross - TeeLength(ND_SedPlateFrame)/2 - ElbowRadius(ND_SedPlateFrame), [0; 0]*deg, ND_SedPlateFrame, PS_SedPlateFrame)
SedFrameSidePipe2 := PipeF(SedFrameElbow2_Origin, B_SedPlateFrameCross - TeeLength(ND_SedPlateFrame)/2 - ElbowRadius(ND_SedPlateFrame), [0; 0]*deg, ND_SedPlateFrame, PS_SedPlateFrame)
ArraySedSidePipe1and2 := ArrayLast(1, 2, -B_SedPlateFrameCross*(N_SedFrameCrossPipe - 2) - TeeLength(ND_SedPlateFrame)/2 + ElbowRadius(ND_SedPlateFrame))
SedFrameSidePipe3 := PipeF(SedFrameElbow1_Origin + [-B_SedPlateFrameCross - TeeLength(ND_SedPlateFrame)/2 + ElbowRadius(ND_SedPlateFrame); 0 m; 0 m], B_SedPlateFrameCross - TeeLength(ND_SedPlateFrame), [0; 0]*deg, ND_SedPlateFrame, PS_SedPlateFrame)
SedFrameSidePipe4 := PipeF(SedFrameElbow2_Origin + [-B_SedPlateFrameCross - TeeLength(ND_SedPlateFrame)/2 + ElbowRadius(ND_SedPlateFrame); 0 m; 0 m], B_SedPlateFrameCross - TeeLength(ND_SedPlateFrame), [0; 0]*deg, ND_SedPlateFrame, PS_SedPlateFrame)
ArraySedSidePipe3and4 := ArrayLast(1, N_SedFrameCrossPipe - 3, -B_SedPlateFrameCross)
SedFrameInnerCrossPipe1 := PipeF(SedFrameInnerCrossPipe1_Origin, L_SedFrameInnerCrossPipe1, [-90; 0]*deg, ND_SedPlateFrame, PS_SedPlateFrame)
SedFrameInnerCrossPipe2 := PipeF(SedFrameInnerCrossPipe2_Origin, 2*SocketDepth(ND_SedPlateFrame), [-90; 0]*deg, ND_SedPlateFrame, PS_SedPlateFrame)
SedFrameInnerCrossPipe3 := PipeF(SedFrameInnerCrossPipe3_Origin, L_SedFrameInnerCrossPipe1, [-90; 0]*deg, ND_SedPlateFrame, PS_SedPlateFrame)
SedFrameEndCrossPipe1 := PipeF(SedFrameEndCrossPipe1_Origin, L_SedFrameEndCrossPipe1, [90; 0]*deg, ND_SedPlateFrame, PS_SedPlateFrame)
SedFrameEndCrossPipe2 := PipeF(SedFrameEndCrossPipe2_Origin, L_SedFrameEndCrossPipe2, [-90; 0]*deg, ND_SedPlateFrame, PS_SedPlateFrame)
ArrayEndCrossPipes :=
    ArrayLast(1, 2, -B_SedPlateFrameCross*(N_SedFrameCrossPipe - 1)) if mod(N_SedFrameCrossPipe, 2) == 0
    stack(ArrayLast(1, 2, -B_SedPlateFrameCross*(N_SedFrameCrossPipe - 1)), MirrorLast([-zc; W_Sed/2], [0 m; W_Sed/2], "y")) otherwise
SedFramePipeScript1 := stack(SedPlateFramePipeLayer, SedFrameCentralPipe1, ArrayPlateFrameCentralTees_1and2, SedFrameCentralPipe2, ArrayPlateFrameCentralTees_3and4, SedFrameSidePipe1, ArraySedSidePipe1and2, SedFrameSidePipe2, ArraySedSidePipe1and2)
SedFramePipeScript2 := stack(SedFrameSidePipe3, ArraySedSidePipe3and4, SedFrameSidePipe4, ArraySedSidePipe3and4)
SedFramePipeScript3 := stack(SedFrameInnerCrossPipe1, ArrayPlateFrameSideTee, SedFrameInnerCrossPipe2, ArrayPlateFrameSideTee, SedFrameInnerCrossPipe3, ArrayPlateFrameSideTee)
SedFramePipeScript4 := stack(SedFrameEndCrossPipe1, SedFrameEndCrossPipe2, SedFrameEndCrossPipe1, ArrayEndCrossPipes, SedFrameEndCrossPipe2, ArrayEndCrossPipes, SedPlateFramePipeFrz)
SedFramePipeScript :=
    stack(SedFramePipeScript1, SedFramePipeScript2, SedFramePipeScript3, SedFramePipeScript4) if N_SedFrameCrossPipe > 3
    stack(SedFramePipeScript1, SedFramePipeScript3, SedFramePipeScript4) otherwise
SedPlateFrameScript := stack(SedPlateFrameFittingScript, SedFramePipeScript)
# Corner wedges
SedCornerWedge := wedge3d([Plant_Origin[0]; Plant_Origin[1]; Plant_Origin[2] - OD(ND_SedJetReverser)], [
    Plant_Origin[0] - L_SedManHorizPipe2 + ((N_SedManifoldPorts - 1)*B_SedDiffuser) + L_SedWallToDiffuserGapMin + OR(ND_SedDiffuser);
    W_Sed;
    Plant_Origin[2] + SedManHorizPipe2_Origin[2] - OR(ND_SedManifold)
])
SedEastCornerWedge := WedgeF([Plant_Origin[0]; Plant_Origin[1]; Plant_Origin[2] - OD(ND_SedJetReverser)], [
    SedManHorizPipe2_Origin[0] - L_SedManHorizPipe2 + L_SedManFirstDiffuserGap + OR(ND_SedDiffuser) + ((N_SedManifoldPorts - 1)*B_SedDiffuser) + L_SedDiffuserOuter/2;
    W_Sed;
    SedManHorizPipe2_Origin[2] - OR_Fitting(ND_SedManifold)
], [0; 0; 0]*deg)
SedJetReverserLipWedgeSouth := WedgeF(Plant_Origin + [0 m; 0 m; -OR(ND_SedJetReverser)], Plant_Origin + [
    -W_Sed/2 + IR(ND_SedJetReverser, PS_SedJetReverser);
    -L_SedUpflow;
    -OR(ND_SedJetReverser) + H_SedSideSlopes
], [-90; 0; 0]*deg)
SedJetReverserLipWedgeNorth := WedgeF(Plant_Origin + [0 m; W_Sed; -OR(ND_SedJetReverser)], Plant_Origin + [
    -W_Sed/2 + IR(ND_SedJetReverser, PS_SedJetReverser);
    W_Sed + L_SedUpflow;
    -OR(ND_SedJetReverser) + H_SedSideSlopes
], [90; 0; 0]*deg)
SedJetReverserLipCut := CylinderF(SedJetReverser_Origin + [-L_SedUpflow + L_FlocWeirToDiffuserGap; 0 m; 0 m], OR(ND_SedJetReverser), L_FlocWeirToDiffuserGap, [0; 0]*deg)
SedCornerWedgeScript := stack(SelectSedTank, SedEastCornerWedge, SedJetReverserLipWedgeSouth, SedJetReverserLipWedgeNorth, Union_All, SedTankFrz, SedJetReverserLipCut, GroupDelete, SubtractFromSedTank)
# Array sed tanks
ThawSed := ThawMultiple(["Sed*"])
ArraySed := array_all(N_SedTanks, 1, W_Sed + T_SedDividingWall)
FreezeSed := FreezeMultiple(["Sed*"])
ArraySedScript := stack(ThawSed, ArraySed, FreezeSed)
# Finish inlet and exit channels and end walls
# Finish tank walls
SedSouthWallThicken := BoxF(Plant_Origin + [T_SedWall; -T_SedWall; -OR(ND_SedJetReverser) - T_SedDividingWall], Plant_Origin + [-L_Sed - T_SedWall; 0 m; Z_SedTop], [0; 0; 0]*deg)
SedNorthWallThicken := BoxF(Plant_Origin + [
    T_SedWall;
    N_SedTanks*W_Sed + (N_SedTanks - 1)*T_SedDividingWall;
    -OR(ND_SedJetReverser) - T_SedDividingWall
], Plant_Origin + [-L_Sed - T_SedWall; N_SedTanks*W_Sed + (N_SedTanks - 1)*T_SedDividingWall + T_SedWall; Z_SedTop], [0; 0; 0]*deg)
SedChannelEntranceCut := BoxF(Plant_Origin + [-L_Sed; N_SedTanks*W_Sed + (N_SedTanks - 1)*T_SedDividingWall; Z_SedChannelBottom], Plant_Origin + [
    -L_Sed + W_SedInletChannelPreWeir;
    N_SedTanks*W_Sed + (N_SedTanks - 1)*T_SedDividingWall + T_SedWall;
    Z_SedTop
], [0; 0; 0]*deg)
SedEndWallScript := stack(SelectSedTank, SedSouthWallThicken, SedNorthWallThicken, SedTankFrz, SedChannelEntranceCut, GroupDelete, SubtractFromSedTank)
# Channel weirs and dividing wall
SedInletChannelYWeir := BoxF(Plant_Origin + [
    -L_Sed + W_SedInletChannelPreWeir;
    W_Sed/2 + L_SedManifoldOffset - OR_Fitting(ND_SedManifold) - S_Fitting/2;
    Z_SedChannelBottom
], Plant_Origin + [
    -L_Sed + W_SedInletChannelPreWeir + T_SedWeir;
    W_Sed*N_SedTanks + T_SedDividingWall*(N_SedTanks - 1);
    Z_SedChannelBottom + H_SedWeirInlet
], [0; 0; 0]*deg)
SedInletChannelXWeir := BoxF(Plant_Origin + [
    -L_Sed + W_SedInletChannelPreWeir + T_SedWeir;
    W_Sed/2 + L_SedManifoldOffset - OR_Fitting(ND_SedManifold) - S_Fitting/2;
    Z_SedChannelBottom
], Plant_Origin + [
    -L_Sed;
    W_Sed/2 + L_SedManifoldOffset - OR_Fitting(ND_SedManifold) - S_Fitting/2 - T_SedWeir;
    Z_SedChannelBottom + H_SedWeirInlet
], [0; 0; 0]*deg)
SedChannelDivider := BoxF(Plant_Origin + [-L_Sed + W_SedInletChannel; 0 m; Z_SedChannelBottom], Plant_Origin + [
    -L_Sed + W_SedInletChannel + T_SedWeir;
    N_SedTanks*W_Sed + (N_SedTanks - 1)*T_SedDividingWall;
    Z_SedChannelBottom + H_SedInletChannel
], [0; 0; 0]*deg)
SedExitChannelWeirY := BoxF(Plant_Origin + [-L_Sed + W_SedInletChannel + T_SedWeir + W_SedExitChannelPostWeir; 0 m; Z_SedChannelBottom], Plant_Origin + [
    -L_Sed + W_SedInletChannel + 2*T_SedWeir + W_SedExitChannelPostWeir;
    N_SedTanks*W_Sed + (N_SedTanks - 1)*T_SedDividingWall;
    Z_SedChannelBottom + H_SedWeirExit
], [0; 0; 0]*deg)
DrainPipeBox := BoxF([
    Plant_Origin[0] - L_Sed + W_SedInletChannelPreWeir + T_SedWeir;
    Plant_Origin[1] + 2*S_Fitting + OD_Fitting(ND_SedChannelDrain);
    Plant_Origin[2] + Z_SedChannelBottom
], [Plant_Origin[0] - L_Sed; Plant_Origin[1]; Plant_Origin[2]], [0; 0; 0]*deg)
SedChannelWeirScript := stack(SedInletChannelYWeir, SedInletChannelXWeir, SedChannelDivider, SedExitChannelWeirY, DrainPipeBox)
# Inlet manifold slope
SedIChanSlopes :=
    local ← view("t")
    for i ∈ 1 .. N_SedTanks - 1
        FlatBox ← BoxF(Plant_Origin + [
            -L_Sed;
            W_Sed/2 + L_SedManifoldOffset - OR_Fitting(ND_SedManifold) - S_Fitting/2 + (W_Sed + T_SedDividingWall)*(i - 1);
            Z_SedChannelBottom
        ], Plant_Origin + [
            -L_Sed + W_SedInletChannelPreWeir;
            W_Sed/2 + L_SedManifoldOffset + OR_Fitting(ND_SedManifold) + S_Fitting/2 + (W_Sed + T_SedDividingWall)*(i - 1);
            Z_SedChannelBottom + (N_SedTanks - i)*H_SedIChanStep
        ], [0; 0; 0]*deg)
        Wedge ← WedgeF(Plant_Origin + [
            -L_Sed + W_SedInletChannelPreWeir;
            W_Sed/2 + L_SedManifoldOffset + OR_Fitting(ND_SedManifold) + S_Fitting/2 + (W_Sed + T_SedDividingWall)*(i - 1);
            Z_SedChannelBottom + (N_SedTanks - i - 1)*H_SedIChanStep
        ], Plant_Origin + [
            -L_Sed + W_SedInletChannelPreWeir + L_SedIChanSlopes;
            W_Sed/2 + L_SedManifoldOffset + OR_Fitting(ND_SedManifold) + S_Fitting/2 + (W_Sed + T_SedDividingWall)*(i - 1) + W_SedInletChannelPreWeir;
            Z_SedChannelBottom + (N_SedTanks - i)*H_SedIChanStep
        ], [90; 0; 0]*deg)
        BaseBox ← BoxF(Plant_Origin + [
            -L_Sed;
            W_Sed/2 + L_SedManifoldOffset + OR_Fitting(ND_SedManifold) + S_Fitting/2 + (W_Sed + T_SedDividingWall)*(i - 1);
            Z_SedChannelBottom
        ], Plant_Origin + [
            -L_Sed + W_SedInletChannelPreWeir;
            W_Sed/2 + L_SedManifoldOffset + OR_Fitting(ND_SedManifold) + S_Fitting/2 + (W_Sed + T_SedDividingWall)*(i - 1) + L_SedIChanSlopes;
            Z_SedChannelBottom + (N_SedTanks - i - 1)*H_SedIChanStep
        ], [0; 0; 0]*deg)
        local ←
            stack(local, FlatBox, Wedge, BaseBox) if i ≠ N_SedTanks - 1
            stack(local, FlatBox, Wedge) otherwise
    return local
UnionSedCon := stack(SelectSedTank, BrepAll, Union_All, SedTankFrz)
FinishSedChannelScript := stack(SedEndWallScript, SelectSedTank, SedChannelWeirScript, SedIChanSlopes, UnionSedCon, SedTankFrz)
# Finish inlet manifold
SedManVertPipes :=
    local ← SelectSedPipes
    for i ∈ 1 .. N_SedTanks
        VertPipe ← PipeSUBF(Plant_Origin + [
            -L_Sed + S_Fitting + OR_Fitting(ND_SedManifold);
            W_Sed/2 + L_SedManifoldOffset + (W_Sed + T_SedDividingWall)*(i - 1);
            Z_SedChannelBottom + H_SedIChanStep*(N_SedTanks - i) - CouplingLength(ND_SedManifold) + SocketDepth(ND_SedManifold)
        ], Z_SedChannelBottom + H_SedIChanStep*(N_SedTanks - i) - Z_SedManifoldPipe - ElbowRadius(ND_SedManifold) - CouplingLength(ND_SedManifold) + SocketDepth(ND_SedManifold), [0; -90]*deg, ND_SedManifold, PS_SedMan, ["SedTankCon"])
        local ← stack(local, VertPipe)
    local ← stack(local, SedPipeFrz)
    return local
SedManCouplings :=
    local ← SelectSedFittings
    for i ∈ 1 .. N_SedTanks
        Coupling ← CouplingSUBF(Plant_Origin + [
            -L_Sed + S_Fitting + OR_Fitting(ND_SedManifold);
            W_Sed/2 + L_SedManifoldOffset + (W_Sed + T_SedDividingWall)*(i - 1);
            Z_SedChannelBottom + H_SedIChanStep*(N_SedTanks - i) - SocketDepth(ND_SedManifold) + 0.0001 m
        ], [0; -90]*deg, ND_SedManifold, PS_SedMan, ["SedTankCon"])
        local ← stack(local, Coupling)
    local ← stack(local, SedFittingFrz)
    return local
FinishSedManifoldScript := stack(SedManVertPipes, SedManCouplings)
# Lamella
# Origins and dimensions
Lamina_Origin := Plant_Origin + [-T_SedPlate*sin(AN_SedPlate); 0 m; Z_SedLamellaBottom]
SedModCap_Origin := Lamina_Origin + [
    -S_SedLaminaPipeToEdge*cos(AN_SedPlate) - N_SedModPlates*(S_SedPlate + T_SedPlate)*cos(AN_SedPlate)/tan(AN_SedPlate) + (T_SedPlate + CapHeight(ND_SedMod) - CapThickness(ND_SedMod))*sin(AN_SedPlate) - OR(ND_SedMod)*cos(AN_SedPlate);
    S_SedLaminaPipeToEdge + OR(ND_SedMod);
    S_SedLaminaPipeToEdge*sin(AN_SedPlate) + (N_SedModPlates*S_SedPlate + (N_SedModPlates + 1)*T_SedPlate + CapHeight(ND_SedMod) - CapThickness(ND_SedMod))*cos(AN_SedPlate) + OR(ND_SedMod)*sin(AN_SedPlate)
]
SedModMirrorLineX := (SedModCap_Origin[0] - (CapHeight(ND_SedMod) - CapThickness(ND_SedMod))*sin(AN_SedPlate) - (L_SedPlate - S_SedLaminaPipeToEdge - OR(ND_SedMod))*cos(AN_SedPlate))/2
SedModMirrorLineZ := ((Z_SedLamellaBottom + T_SedPlate*cos(AN_SedPlate) + (L_SedPlate - S_SedLaminaPipeToEdge - OR(ND_SedMod))*sin(AN_SedPlate)) + (SedModCap_Origin[2] - (CapHeight(ND_SedMod) - CapThickness(ND_SedMod))*cos(AN_SedPlate)))/2
# Lamella
SedLamella := BoxF(Lamina_Origin, Lamina_Origin + [T_SedPlate; W_Sed; L_SedPlate], [0; -90 deg + AN_SedPlate; 0])
ArraySedLamella := ArrayLast(1, N_SedModPlates, -B_SedPlate/sin(AN_SedPlate))
SedLamellaScript := stack(SedLamellaLayer, SedLamella, ArraySedLamella, SedLamellaFrz)
# Module connector caps
SedModCapRight := CapF(SedModCap_Origin, [0; 0; 0], ND_SedMod)
SedModCapLeft := CapF(SedModCap_Origin - [
    B_SedPlate*(N_SedModPlates - 1) + T_SedPlate + 2*(CapHeight(ND_SedMod) - OR_Fitting(ND_SedMod) + OR(ND_SedMod));
    0 m;
    0 m
], [0; 180 deg; 0], ND_SedMod)
SedModCapScript := stack(SedModCapLayer, SedModCapRight, SedModCapLeft, SedModCapFrz)
# Module Connector Pipes and Spacers
PS_SedMod := SDR_13.5
PS_SedModStr := PSToString(PS_SedMod)
PS_SedModSpacer := SDR_17
PS_SedModSpacerStr := PSToString(PS_SedModSpacer)
SedModPipe := PipeF(SedModCap_Origin, B_SedPlate*(N_SedModPlates - 1) + T_SedPlate + 2*(CapHeight(ND_SedMod) - OR_Fitting(ND_SedMod) + OR(ND_SedMod)), [0; 0; 0], ND_SedMod, PS_SedMod)
SedModSpacers := PipeF(SedModCap_Origin - [CapHeight(ND_SedMod) + T_SedPlate - CapThickness(ND_SedMod); 0; 0], B_SedPlate - T_SedPlate, [0; 0; 0], ND_SedModSpacer, PS_SedModSpacer)
ArraySedModSpacers := ArrayLast(1, N_SedModPlates - 1, -B_SedPlate)
SedModPipeScript := stack(SedModPipeLayer, SedModPipe, SedModPipeFrz, SedModSpacerLayer, SedModSpacers, ArraySedModSpacers, SedModSpacerFrz)
# Rotate and array connectors and array modules
ThawSedModPiping := ThawMultiple(["SedMod*Plu"])
RotateSedModPiping := Rotate_All([SedModCap_Origin[0]; SedModCap_Origin[2]; SedModCap_Origin[1]], 90 deg - AN_SedPlate)
MirrorSedModPipingUp := MirrorAll([SedModMirrorLineX; SedModMirrorLineZ], [SedModMirrorLineX; SedModMirrorLineZ] + [zc; zc/tan(AN_SedPlate)], "n")
TripleSedModPiping := array_all(3, 1, (W_SedPlate - 2*(S_SedLaminaPipeToEdge + OR(ND_SedMod)))/2)
ThawSedModLamella := ThawMultiple(["SedModLamella"])
ArraySedMod := array_all(1, N_SedModules, -B_SedPlate*N_SedModPlates/sin(AN_SedPlate))
FreezeSedModComponents := FreezeMultiple(["SedMod*"])
SedModArrayScript := stack(ThawSedModPiping, view("f"), RotateSedModPiping, MirrorSedModPipingUp, view("t"), TripleSedModPiping, ThawSedModLamella, ArraySedMod, FreezeSedModComponents)
SedLamellaScript := stack(SedLamellaScript, SedModCapScript, SedModPipeScript, SedModArrayScript)
# Inlet manifold diffusers
SedDiffuser_Origin := SedManHorizPipe2_Origin + [
    -L_SedManHorizPipe2 + L_SedManFirstDiffuserGap + OR(ND_SedDiffuser);
    0 m;
    -IR(ND_SedManifold, PS_SedMan)
]
SedDiffOuterCircleSection := circle([SedDiffuser_Origin[0]; SedDiffuser_Origin[1]; SedDiffuser_Origin[2]], OR(ND_SedDiffuser))
SedDiffOuterRectangleSection := Pline3D([
    [
        SedDiffuser_Origin[0] + L_SedDiffuserInner/2 + T_SedDiffuserPvc;
        SedDiffuser_Origin[1] + W_SedDiffuserInner/2 + T_SedDiffuserPvc;
        SedDiffuser_Origin[2] - L_SedManifoldDiffuser
    ];
    [
        SedDiffuser_Origin[0] - L_SedDiffuserInner/2 - T_SedDiffuserPvc;
        SedDiffuser_Origin[1] + W_SedDiffuserInner/2 + T_SedDiffuserPvc;
        SedDiffuser_Origin[2] - L_SedManifoldDiffuser
    ];
    [
        SedDiffuser_Origin[0] - L_SedDiffuserInner/2 - T_SedDiffuserPvc;
        SedDiffuser_Origin[1] - W_SedDiffuserInner/2 - T_SedDiffuserPvc;
        SedDiffuser_Origin[2] - L_SedManifoldDiffuser
    ];
    [
        SedDiffuser_Origin[0] + L_SedDiffuserInner/2 + T_SedDiffuserPvc;
        SedDiffuser_Origin[1] - W_SedDiffuserInner/2 - T_SedDiffuserPvc;
        SedDiffuser_Origin[2] - L_SedManifoldDiffuser
    ];
    [
        SedDiffuser_Origin[0] + L_SedDiffuserInner/2 + T_SedDiffuserPvc;
        SedDiffuser_Origin[1] + W_SedDiffuserInner/2 + T_SedDiffuserPvc;
        SedDiffuser_Origin[2] - L_SedManifoldDiffuser
    ]
])
SedDiffZoomOuter := ZoomWindow([SedDiffuser_Origin[0] - L_SedDiffuserInner; SedDiffuser_Origin[1] + W_SedDiffuserInner], [SedDiffuser_Origin[0] + L_SedDiffuserInner; SedDiffuser_Origin[1] - W_SedDiffuserInner])
SedDiffOuterLoft := Loft([SedDiffuser_Origin[0] + OR(ND_SedDiffuser); SedDiffuser_Origin[1]; SedDiffuser_Origin[2]], [
    SedDiffuser_Origin[0] + L_SedDiffuserInner/2 + T_SedDiffuserPvc;
    SedDiffuser_Origin[1] + W_SedDiffuserInner/2 + T_SedDiffuserPvc;
    SedDiffuser_Origin[2] - L_SedManifoldDiffuser
])
SedDiffInnerCircleSection := circle([SedDiffuser_Origin[0]; SedDiffuser_Origin[1]; SedDiffuser_Origin[2]], IR(ND_SedDiffuser, PS_SedDiffuser))
SedDiffInnerRectangleSection := Pline3D([
    [
        SedDiffuser_Origin[0] + L_SedDiffuserInner/2;
        SedDiffuser_Origin[1] + W_SedDiffuserInner/2;
        SedDiffuser_Origin[2] - L_SedManifoldDiffuser
    ];
    [
        SedDiffuser_Origin[0] - L_SedDiffuserInner/2;
        SedDiffuser_Origin[1] + W_SedDiffuserInner/2;
        SedDiffuser_Origin[2] - L_SedManifoldDiffuser
    ];
    [
        SedDiffuser_Origin[0] - L_SedDiffuserInner/2;
        SedDiffuser_Origin[1] - W_SedDiffuserInner/2;
        SedDiffuser_Origin[2] - L_SedManifoldDiffuser
    ];
    [
        SedDiffuser_Origin[0] + L_SedDiffuserInner/2;
        SedDiffuser_Origin[1] - W_SedDiffuserInner/2;
        SedDiffuser_Origin[2] - L_SedManifoldDiffuser
    ];
    [
        SedDiffuser_Origin[0] + L_SedDiffuserInner/2;
        SedDiffuser_Origin[1] + W_SedDiffuserInner/2;
        SedDiffuser_Origin[2] - L_SedManifoldDiffuser
    ]
])
SedDiffZoomInner := ZoomWindow([SedDiffuser_Origin[0] - L_SedDiffuserInner; SedDiffuser_Origin[1] + W_SedDiffuserInner], [SedDiffuser_Origin[0] + L_SedDiffuserInner; SedDiffuser_Origin[1] - W_SedDiffuserInner])
SedDiffInnerLoft := Loft([
    SedDiffuser_Origin[0] + IR(ND_SedDiffuser, PS_SedDiffuser);
    SedDiffuser_Origin[1];
    SedDiffuser_Origin[2]
], [
    SedDiffuser_Origin[0] + L_SedDiffuserInner/2;
    SedDiffuser_Origin[1] + W_SedDiffuserInner/2;
    SedDiffuser_Origin[2] - L_SedManifoldDiffuser
])
SedDiffArray := Array_All(1, N_SedManifoldPorts, B_SedDiffuser)
SedDiffuserScript := stack(SedDiffuserLayer, SedDiffOuterCircleSection, SedDiffOuterRectangleSection, SedDiffZoomOuter, SedDiffOuterLoft, SedDiffuserFreeze, SedDiffInnerCircleSection, SedDiffInnerRectangleSection, SedDiffZoomInner, SedDiffInnerLoft, GroupDelete, SubtractFromSedDiffuser, SelectSedDiffuser, SedDiffArray, SedDiffuserFreeze)
# Inlet channel drain
# Origins and dimensions
SedIChannelDrainVertCoupling_Origin := Plant_Origin + [
    -L_Sed - T_SedWall + max(T_SedWall + S_Fitting + OR_Fitting(ND_SedChannelDrain), SocketDepth(ND_SedChannelDrain) + TeeLength(ND_SedChannelDrain)/2);
    S_Fitting + OR_Fitting(ND_SedChannelDrain);
    Z_SedChannelBottom - CouplingLength(ND_SedChannelDrain) + SocketDepth(ND_SedChannelDrain) + 0.0001 m
]
L_SedIChannelVertPipe := Z_SedChannelBottom + OR(ND_SedChannelDrain) - CouplingLength(ND_SedChannelDrain) + SocketDepth(ND_SedChannelDrain) - ShortTeeLength(ND_SedChannelDrain)
L_SedIChannelHorizPipe := SedIChannelDrainVertCoupling_Origin[0] - (Plant_Origin[0] - L_Sed - T_SedWall) - TeeLength(ND_SedChannelDrain)/2
# Inlet channel drain fittings
SedIChannelDrainVertCoupling := CouplingSUBF(SedIChannelDrainVertCoupling_Origin, [0; 90; 0]*deg, ND_SedChannelDrain, PS_SedChannelDrain, ["SedTankCon"])
SedIChannelDrainTee := TeeSUBF(SedIChannelDrainVertCoupling_Origin + [0 m; 0 m; -L_SedIChannelVertPipe], [0; 0; 90]*deg, ND_SedChannelDrain, PS_SedChannelDrain, ["SedTankCon"])
SedInletChannelDrainFittingScript := stack(SelectSedFittings, SedIChannelDrainVertCoupling, SedIChannelDrainTee, SedFittingFrz)
# Inlet channel drain pipes
SedIChannelDrainHorizPipe := PipeSUBF(SedIChannelDrainVertCoupling_Origin + [-TeeLength(ND_SedChannelDrain)/2; 0; -L_SedIChannelVertPipe - ShortTeeLength(ND_SedChannelDrain)], L_SedIChannelHorizPipe, [0; 0; 0]*deg, ND_SedChannelDrain, PS_SedChannelDrain, ["SedTankCon"])
SedIChannelDrainVertPipe := PipeSUBF(SedIChannelDrainVertCoupling_Origin, L_SedIChannelVertPipe, [0; 270; 0]*deg, ND_SedChannelDrain, PS_SedChannelDrain, ["SedTankCon"])
SedIChannelDrainStub := PipeF(SedIChannelDrainVertCoupling_Origin + [0 m; 0 m; CouplingLength(ND_SedChannelDrain) - 2*SocketDepth(ND_SedChannelDrain)], H_SedInletChannel + SocketDepth(ND_SedChannelDrain), [0; 90; 0]*deg, ND_SedChannelDrain, PS_SedChannelDrain)
SedInletChannelDrainPipeScript := stack(SelectSedPipes, SedIChannelDrainHorizPipe, SedIChannelDrainVertPipe, SedPipeFrz, SedInletDrainRemovables, SedIChannelDrainStub, SedInletDrainRemovablesFrz)
SedInletDrainScript := stack(SedInletChannelDrainFittingScript, SedInletChannelDrainPipeScript)
# Exit channel drain
# Origins and dimensions
SedEChannelDrainVertCoupling_Origin := Plant_Origin + [
    -L_Sed + W_SedInletChannel + T_SedWeir + W_SedExitChannelPostWeir/2;
    S_Fitting + OR_Fitting(ND_SedChannelDrain);
    Z_SedChannelBottom - CouplingLength(ND_SedChannelDrain) + SocketDepth(ND_SedChannelDrain)
]
L_SedEChannelVertPipe := Z_SedChannelBottom + OR(ND_SedChannelDrain) - CouplingLength(ND_SedChannelDrain) + SocketDepth(ND_SedChannelDrain) - ElbowRadius(ND_SedChannelDrain)
L_SedEChannelHorizPipe := SedEChannelDrainVertCoupling_Origin[0] - SedIChannelDrainVertCoupling_Origin[0] - TeeLength(ND_SedChannelDrain)/2 - ElbowRadius(ND_SedChannelDrain)
# Exit channel drain fittings
SedEChannelDrainVertCoupling := CouplingSUBF(SedEChannelDrainVertCoupling_Origin, [0; 90; 0]*deg, ND_SedChannelDrain, PS_SedChannelDrain, ["SedTankCon"])
SedEChannelDrainElbow := ElbowSUBF(SedEChannelDrainVertCoupling_Origin + [0 m; 0 m; -L_SedEChannelVertPipe], [0; 0; 270]*deg, ND_SedChannelDrain, PS_SedChannelDrain, ["SedTankCon"])
SedExitChannelDrainFittingScript := stack(SelectSedFittings, SedEChannelDrainVertCoupling, SedEChannelDrainElbow, SedFittingFrz)
# Exit channel drain pipes
SedEChannelDrainHorizPipe := PipeSUBF(SedEChannelDrainVertCoupling_Origin + [-ElbowRadius(ND_SedChannelDrain); 0; -L_SedEChannelVertPipe - ElbowRadius(ND_SedChannelDrain)], L_SedEChannelHorizPipe, [0; 0; 0]*deg, ND_SedChannelDrain, PS_SedChannelDrain, ["SedTankCon"])
SedEChannelDrainVertPipe := PipeSUBF(SedEChannelDrainVertCoupling_Origin, L_SedEChannelVertPipe, [0; 270; 0]*deg, ND_SedChannelDrain, PS_SedChannelDrain, ["SedTankCon"])
SedEChannelDrainStub := PipeF(SedEChannelDrainVertCoupling_Origin, H_SedInletChannel + SocketDepth(ND_SedChannelDrain), [0; 90; 0]*deg, ND_SedChannelDrain, PS_SedChannelDrain)
SedExitChannelDrainPipeScript := stack(SelectSedPipes, SedEChannelDrainHorizPipe, SedEChannelDrainVertPipe, SedPipeFrz, SedExitDrainRemovables, SedEChannelDrainStub, SedExitDrainRemovablesFrz)
SedExitDrainScript := stack(SedExitChannelDrainFittingScript, SedExitChannelDrainPipeScript)
# Outlets to filter
# Origins and dimensions
SedOutletCoupling_Origin(N) := Plant_Origin + [
    -L_Sed + W_SedInletChannel + T_SedWeir + W_SedExitChannelPostWeir/2;
    W_Sed - 2*S_Fitting - OR_Fitting(ND_SedToFiPipe);
    Z_SedChannelBottom - SocketDepth(ND_SedToFiPipe)
] + [
    0 m;
    (W_Sed + T_SedDividingWall)*(2*N - 2)*(N_Fi > 2) + (W_Sed + T_SedDividingWall)*(N - 1)*(N_Fi == 2);
    0 m
]
SedOutletElbow_Origin(N) := [
    SedOutletCoupling_Origin(N)[0];
    SedOutletCoupling_Origin(N)[1];
    Z_FiInletChannelBottom - SocketDepth(ND_SedToFiPipe)
]
SedOutletVertPipe_Origin(N) := SedOutletCoupling_Origin(N) + [0; 0; 2*SocketDepth(ND_SedToFiPipe) - CouplingLength(ND_SedToFiPipe)]
L_SedOutletVertPipe := SedOutletCoupling_Origin(1)[2] - SedOutletElbow_Origin(1)[2] - CouplingLength(ND_SedToFiPipe) + 2*SocketDepth(ND_SedToFiPipe)
SedOutletHorizPipe_Origin(N) := SedOutletElbow_Origin(N) + [-ElbowRadius(ND_SedToFiPipe); 0; -ElbowRadius(ND_SedToFiPipe)]
L_SedOutletHorizPipe := SocketDepth(ND_SedToFiPipe) + T_FiBoxWall + W_DCWalkway + T_SedWall + W_SedInletChannel + T_SedWeir + W_SedExitChannelPostWeir/2 - ElbowRadius(ND_SedToFiPipe)
# Modifications made for 2 train plants:
mirrorpt := Floc_Origin + [-L_Floc + L_Et; (N_FlocChannels - 1)*(W_FlocChannel + T_FlocDividingWall); 0 m] + [-L_Et - T_PlantWall - W_Et/2; W_Et + T_PlantWall; 0]
# this is the center line: mirrorpt
SedSplitTee_Origin(N) := [
    mirrorpt[0];
    SedOutletHorizPipe_Origin(N)[1];
    SedOutletHorizPipe_Origin(N)[2] - ShortTeeLength(ND_SedToFiPipe)
]
L_SedOutletHorizPipeSplit := SedOutletHorizPipe_Origin(N_SedToFiPipes)[0] - SedSplitTee_Origin(N_SedToFiPipes)[0] - TeeLength(ND_SedToFiPipe)/2
SedSplitVertPipe_Origin(N) := SedSplitTee_Origin(N)
# Note that this is only used after the elbow (N-1 of them)
SedSplitTee2_Origin(N) := SedSplitTee_Origin(N) + [0; 0; -2*SocketDepth(ND_SedToFiPipe)]
SedSplitElbow_Origin := SedSplitTee_Origin(N_SedToFiPipes) + [
    0;
    0;
    -2*SocketDepth(ND_SedToFiPipe) - ShortTeeLength(ND_SedToFiPipe) + ElbowRadius(ND_SedToFiPipe)
]
L_SedSplitVertPipe := 2*SocketDepth(ND_SedToFiPipe)
SedYPipe1Split_Origin := SedSplitTee2_Origin(N_SedToFiPipes) + [0; -ElbowRadius(ND_SedToFiPipe); -ShortTeeLength(ND_SedToFiPipe)]
SedYPipe2Split_Origin(N) := SedSplitTee2_Origin(N) + [0; -TeeLength(ND_SedToFiPipe)/2; -ShortTeeLength(ND_SedToFiPipe)]
L_SedYPipeSplit := SedSplitTee_Origin(N_SedToFiPipes)[1] - SedSplitTee_Origin(N_SedToFiPipes - 1)[1] - TeeLength(ND_SedToFiPipe)
# This should be the same length.
FilterElbowSplit_Origin := SedYPipe2Split_Origin(1) + [0; -(SedYPipe2Split_Origin(1)[1] - Plant_Origin[1] + ElbowRadius(ND_SedToFiPipe) + S_Fitting); 0]
# This will be used in the filter!!!
# Make sure that it agrees with the length for pipe6 in the drawing script generator below.
# Sed outlet fittings
L_SedYPipeSplit - 20 cm
SedOutletCouplingScript :=
    Local ← SelectSedFittings
    for i ∈ 1 .. N_SedToFiPipes
        OutletCoupling ← CouplingSUBF(SedOutletCoupling_Origin(i), [0; 270]*deg, ND_SedToFiPipe, PS_SedToFiPipe, ["SedTankCon"])
        Local ← stack(Local, OutletCoupling)
    Local ← stack(Local, SedFittingFrz)
    return Local
SedOutletElbowScript :=
    Local ← SelectSedFittings
    for i ∈ 1 .. N_SedToFiPipes
        OutletElbow ← ElbowSUBF(SedOutletElbow_Origin(i), [0; 0; 270]*deg, ND_SedToFiPipe, PS_SedToFiPipe, ["SedTankCon"])
        Local ← stack(Local, OutletElbow)
    Local ← stack(Local, SedFittingFrz)
    return Local
# These are the same for the sed split script
# Sed outlet pipes
SedOutletVertPipeScript :=
    Local ← SelectSedPipes
    for i ∈ 1 .. N_SedToFiPipes
        OutletPipe ← PipeSUBF(SedOutletVertPipe_Origin(i), L_SedOutletVertPipe, [0; 270]*deg, ND_SedToFiPipe, PS_SedToFiPipe, ["SedTankCon"])
        Local ← stack(Local, OutletPipe)
    Local ← stack(Local, SedPipeFrz)
    return Local
# This is the same for the sed split script
SedOutletHorizPipeScript :=
    Local ← SedToFiPipeLayer
    for i ∈ 1 .. N_SedToFiPipes
        OutletPipe ← PipeSUBF(SedOutletHorizPipe_Origin(i), L_SedOutletHorizPipe, [0; 0]*deg, ND_SedToFiPipe, PS_SedToFiPipe, ["SedTankCon"])
        Local ← stack(Local, OutletPipe)
    Local ← stack(Local, SedToFiPipeFrz)
    return Local
SedOutletScript := stack(SedOutletCouplingScript, SedOutletElbowScript, SedOutletVertPipeScript, SedOutletHorizPipeScript)
# These things are different for the sed split script:
SedOutletHorizPipeSplitScript :=
    Local ← SedToFiPipeLayer
    for i ∈ 1 .. N_SedToFiPipes
        OutletPipe ← PipeSUBF(SedOutletHorizPipe_Origin(i), L_SedOutletHorizPipeSplit, [0; 0]*deg, ND_SedToFiPipe, PS_SedToFiPipe, ["SedTankCon"])
        Local ← stack(Local, OutletPipe)
    Local ← stack(Local, SedToFiPipeFrz)
    return Local
SedOutletSplitScript := stack(SedOutletCouplingScript, SedOutletElbowScript, SedOutletVertPipeScript, SedOutletHorizPipeSplitScript)
# Determine which to use for real:
SedOutletScript :=
    SedOutletScript if N_Train == 1
    SedOutletSplitScript
# This is a change to the actual sed tank code maybe!
# careful.
# This part is NOT mirrored! There is only one per train.
SedOutletHorizPipeSplitScript2 :=
    Local ← SedToFiPipeSplitLayer
    for i ∈ 1 .. N_SedToFiPipes
        OutletPipe ← PipeSUBF(SedOutletHorizPipe_Origin(i), L_SedOutletHorizPipeSplit, [0; 0]*deg, ND_SedToFiPipe, PS_SedToFiPipe, ["SedTankCon"])
        Local ← stack(Local, OutletPipe)
    for i ∈ 1 .. N_SedToFiPipes - 1
        OutletPipe2 ← PipeF(SedSplitVertPipe_Origin(i), L_SedSplitVertPipe, [0; -90]*deg, ND_SedToFiPipe, PS_SedToFiPipe)
        Local ← stack(Local, OutletPipe2)
    if N_SedToFiPipes > 2
        for i ∈ 2 .. N_SedToFiPipes - 1
            OutletPipe3 ← PipeF(SedYPipe2Split_Origin(i), L_SedYPipeSplit, [90; 0]*deg, ND_SedToFiPipe, PS_SedToFiPipe)
            Local ← stack(Local, OutletPipe3)
    Local ← Local otherwise
    pipe4 ← PipeF(SedYPipe1Split_Origin, L_SedYPipeSplit + TeeLength(ND_SedToFiPipe) - ElbowRadius(ND_SedToFiPipe) - TeeLength(ND_SedToFiPipe)/2, [90; 0]*deg, ND_SedToFiPipe, PS_SedToFiPipe)
    pipe5 ← PipeF(SedSplitVertPipe_Origin(N_SedToFiPipes), L_SedSplitVertPipe + ShortTeeLength(ND_SedToFiPipe) - ElbowRadius(ND_SedToFiPipe), [0; -90]*deg, ND_SedToFiPipe, PS_SedToFiPipe)
    pipe6 ← PipeF(SedYPipe2Split_Origin(1), SedYPipe2Split_Origin(1)[1] - Plant_Origin[1] + ElbowRadius(ND_SedToFiPipe) + S_Fitting, [90; 0]*deg, ND_SedToFiPipe, PS_SedToFiPipe)
    Local ← stack(Local, pipe4, pipe5, pipe6, SedToFiPipeFrzSplit)
    return Local
# for pipe6, I am not sure how much shorter this should be or what the constraints are.
SedOutletFittingSplitScript :=
    Local ← SedToFiFittingSplitLayer
    for i ∈ 1 .. N_SedToFiPipes
        OutletTee ← TeeF(SedSplitTee_Origin(i), [0; 0; -90]*deg, ND_SedToFiPipe, PS_SedToFiPipe)
        Local ← stack(Local, OutletTee)
    for i ∈ 1 .. N_SedToFiPipes - 1
        OutletTee2 ← TeeF(SedSplitTee2_Origin(i), [0; 90; 90]*deg, ND_SedToFiPipe, PS_SedToFiPipe)
        Local ← stack(Local, OutletTee2)
    elbow ← ElbowF(SedSplitElbow_Origin, [90; -90; 0]*deg, ND_SedToFiPipe, PS_SedToFiPipe)
    Local ← stack(Local, elbow, SedToFiFittingFrzSplit)
    return Local
SedSplitScript := stack(SedOutletHorizPipeSplitScript2, SedOutletFittingSplitScript)
# This part will be added in the filter section after the plant parts have been mirrored.
# The next part will attach the sed outlets to the filters and is therefore completed in the filters.
# Sed surface skimmer
# Origins and Dimensions
H_SkimmerToSurface := 3 cm
SedSkimmerCap0_Origin := Plant_Origin + [
    Plant_Origin[0] - L_Sed + W_SedExitChannel + W_SedInletChannel + T_SedWeir + T_SedChannelWall + OR_Fitting(ND_SedSkimmer);
    W_Sed/2 - OR_Fitting(ND_SedLaunder) - S_Fitting - OR_Fitting(ND_SedSkimmer);
    ZW_Sed - H_SkimmerToSurface
]
SedSkimmerHorizPipe0_Origin := [
    SedSkimmerCap0_Origin[0] - ElbowRadius(ND_SedSkimmer);
    SedSkimmerCap0_Origin[1];
    Plant_Origin[2] + Z_SedChannelBottom - T_SedChannelWall - OR_Fitting(ND_SedSkimmer)
]
SedSkimmerElbow0_Origin := SedSkimmerHorizPipe0_Origin + [ElbowRadius(ND_SedSkimmer); 0 m; ElbowRadius(ND_SedSkimmer)]
SedSkimmerVertPipe0_Origin := SedSkimmerCap0_Origin
SedSkimmerFittingsScript :=
    local ← SelectSedFittings
    for i ∈ 1 .. N_SedTanks
        Cap ← CapF(SedSkimmerCap0_Origin + [0 m; (W_Sed + T_SedDividingWall)*(i - 1); 0 m], [0; -90]*deg, ND_SedSkimmer)
        Elbow ← ElbowF(SedSkimmerElbow0_Origin + [0 m; (W_Sed + T_SedDividingWall)*(i - 1); 0 m], [0; 0; 270]*deg, ND_SedSkimmer, SDR_26)
        local ← stack(local, Cap, Elbow)
    local ← stack(local, SedFittingFrz)
SedSkimmerPipesScript :=
    local ← SelectSedPipes
    for i ∈ 1 .. N_SedTanks
        VertPipe ← PipeF(SedSkimmerVertPipe0_Origin + [0 m; (W_Sed + T_SedDividingWall)*(i - 1); 0 m], SedSkimmerCap0_Origin[2] - SedSkimmerElbow0_Origin[2], [0; -90]*deg, ND_SedSkimmer, SDR_26)
        HorizPipe ← PipeSUBF(SedSkimmerHorizPipe0_Origin + [0 m; (W_Sed + T_SedDividingWall)*(i - 1); 0 m], T_SedWall + W_SedInletChannel + T_SedWeir + W_SedExitChannel + T_SedChannelWall + OR_Fitting(ND_SedSkimmer) - ElbowRadius(ND_SedSkimmer), [0; 0]*deg, ND_SedSkimmer, SDR_26, ["SedTankCon"])
        local ← stack(local, VertPipe, HorizPipe)
    local ← stack(local, SedPipeFrz)
SedSkimmerScript := stack(SedSkimmerFittingsScript, SedSkimmerPipesScript)
# Mirror sed tanks for double treatment train
ThawAll := ThawMultiple(["Sed*"])
MirrorDistance :=
    (Floc_Origin[0] - L_Floc - W_TrainWalkway/2 - T_FlocWall) if Mod == 0
    (Plant_Origin[0] - L_Sed - W_TrainWalkway - 2*T_SedWall) otherwise
MirrorSedTanks := Mirror3dAll("yz", [MirrorDistance; 0 m], "n")
FreezeAll := FreezeMultiple(["Sed*"])
# Add water levels
SedWaterLayer := layer_new("SedWater", blue2)
SedWaterBox := BoxF(Plant_Origin, [-L_SedUpflow; W_Sed; HW_Sed] + Plant_Origin, [0; 0; 0]*deg)
SedIChannelWater := BoxF([Plant_Origin[0] - L_Sed; Plant_Origin[1]; Z_SedChannelBottom], [Plant_Origin[0] - L_Sed; Plant_Origin[1]; Z_SedChannelBottom] + [W_SedInletChannelPreWeir + T_SedWeir + W_SedInletChannelPostWeir; W_Sed; HW_SedInletChannel], [0; 0; 0]*deg)
SedEChannelWater := BoxF([
    Plant_Origin[0] - L_Sed + W_SedInletChannel + 2*T_SedWeir + W_SedExitChannelPostWeir;
    Plant_Origin[1];
    Z_SedChannelBottom
], [
    Plant_Origin[0] - L_Sed + W_SedInletChannel + T_SedWeir + W_SedExitChannel;
    Plant_Origin[1] + W_Sed;
    Z_SedChannelBottom + HW_SedExitChannel
], [0; 0; 0]*deg)
SedWaterFrz := FreezeLayer("SedWater")
SedWaterScript := stack(SedWaterLayer, SedWaterBox, SedIChannelWater, SedEChannelWater, SedWaterFrz)
AC_SedTank := stack(SedConScript, SedSludgeDrainScript, SedManifoldScript, SedLaunderScript, SedHopperDrainScript, SedPlateFrameScript, SedCornerWedgeScript, ArraySedScript, FinishSedChannelScript, FinishSedManifoldScript, SedLamellaScript, SedDiffuserScript, SedInletDrainScript, SedExitDrainScript, SedOutletScript)
