Q_Plant := 1.6*L/s
# [reference: ExpertInputs.xmcd]
# [reference: MathFunctions.xmcd]
# [reference: PipeDatabase.xmcd]
# [reference: MaterialsDatabase.xmcd]
# [reference: FluidsFunctions.xmcd]
# [reference: CdcFunctions.xmcd]
# [reference: SedimentationTankjem384.xmcd]
# [reference: Flocculator.xmcd]
# [reference: LFOM.xmcd]
# [reference: EntranceTankLowjem384.xmcd]
# [reference: LFStackedRapidSandFilter.xmcd]
# [reference: LinearCdc.xmcd]
# [reference: ChemStorageTanks.xmcd]
# AutoCAD drawing programs:
# Translators:
# These are the codes that take MathCAD outputs and create AutoCAD scripts that are used to draw the plant (formerly Basics)
# [reference: MtoATranslators.xmcd]
# The wrapped MtoA translator contains the functions that the user will want to access. These functions will draw pieces with full functionality - specifying the location, dimension, and orientation of the object. Also, it contains layer control and subtraction capabilities for grouped objects.
# [reference: MtoATranslatorsWrapped.xmcd]
# Drawing functions:
# [reference: ChannelF.xmcd]
# [reference: PlumbingF.xmcd]
# [reference: TankF.xmcd]
# [reference: StairsF.xmcd]
# [reference: DrainChannelF.xmcd]
# AutoCAD Script Files:
# [reference: FlocculatorACLow.xmcd]
# Sedimentation Tank Drawing
# Sedimentation Tank Concrete (excluding lamella support ledge)
# Side Slopes and Launder Support Ledge
SedTankLayer := layer_new("SedTankCon", grey)
SelectSedCon := SelectLayer("SedTankCon")
DrawSedTank := ChannelDrawing(Plant_Origin + [-L_Sed; W_SedBay + T_PlantWall; 0 m], [W_SedBay + 2*T_PlantWall; L_Sed; H_Floc], T_PlantWall, [270; 0; 0]*deg)
# Draw as a channel so that it can be arrayed. All side walls at end.
SedSlopePolyline := Pline3D([
    [Plant_Origin[0]; Plant_Origin[1] + W_SedBay; Plant_Origin[2]] + [0 m; T_ConcreteMin; 0 m];
    [Plant_Origin[0]; Plant_Origin[1] + W_SedBay; Plant_Origin[2]] + [Plant_Origin[0]; -W_SedBay/2 + W_SedSludge/2; 0 m];
    [Plant_Origin[0]; Plant_Origin[1] + W_SedBay; Plant_Origin[2]] + [0 m; -W_SedBay/2 + W_SedSludge/2; H_SedSludge];
    [Plant_Origin[0]; Plant_Origin[1] + W_SedBay; Plant_Origin[2]] + [0 m; -W_SedBay/2 + W_SedSludge/2 + T_SedDrainCoverLedge; H_SedSludge];
    [Plant_Origin[0]; Plant_Origin[1] + W_SedBay; Plant_Origin[2]] + [0 m; -W_SedBay/2 + W_SedSludge/2 + T_SedDrainCoverLedge; H_SedSludge + H_SedDrainCoverTotal];
    [Plant_Origin[0]; Plant_Origin[1] + W_SedBay - T_ConcreteMin; Plant_Origin[2]] + [0 m; 0 m; Z_SedSideSlopes - T_ConcreteMin*tan(AN_SedSlope)];
    [Plant_Origin[0]; Plant_Origin[1] + W_SedBay - T_ConcreteMin; Z_SedLamellaBottom];
    [Plant_Origin[0]; Plant_Origin[1] + W_SedBay; Plant_Origin[2]] + [0 m; T_ConcreteMin; Z_SedLamellaBottom];
    [Plant_Origin[0]; Plant_Origin[1] + W_SedBay; Plant_Origin[2]] + [0 m; T_ConcreteMin; 0 m]
])
ExtrudeSedSlopes := ExtrudeLast(-L_Sed)
MirrorSedSlopes := Mirror3dLast("zx", [Plant_Origin[0]; Plant_Origin[1] + W_SedBay - W_SedBay/2], "n")
SedLaunderLedge := BoxF([
    2*SocketDepth(ND_SedLaunder);
    W_SedBay - 1/2*W_SedBay + ConRadius(ND_SedLaunder);
    Z_SedLaunder - ConRadius(ND_SedLaunder)
] + Plant_Origin, [
    0;
    W_SedBay - 1/2*W_SedBay - ConRadius(ND_SedLaunder);
    Z_SedLaunder - ConRadius(ND_SedLaunder) - T_ConcreteMin
] + Plant_Origin, [0; 0; 0]*deg)
SedSlopeLedgeScript := stack(SedTankLayer, DrawSedTank, SedSlopePolyline, ExtrudeSedSlopes, MirrorSedSlopes, SedLaunderLedge)
# Floc Hopper Front and Back Slopes
SedHopperPeak := [
    [Plant_Origin[0] - L_Sed; Plant_Origin[1]; Plant_Origin[2] + H_SedSludge + S_Fitting];
    [Plant_Origin[0] - L_SedDrainCoverTotal; Plant_Origin[1]; Plant_Origin[2] + H_SedSludge + S_Fitting];
    [Plant_Origin[0] - L_SedDrainCoverTotal; Plant_Origin[1]; Z_SedManifoldPipe];
    [(Plant_Origin[0] - L_SedDrainCoverTotal - T_SedWeir); Plant_Origin[1]; Z_SedManifoldPipe];
    [Plant_Origin[0] - L_Sed; Plant_Origin[1]; Plant_Origin[2] + H_SedSludge + S_Fitting]
] = [
    [-1.76967; 0; 0.099168]; [-1.46967; 0; 0.099168]; [-1.46967; 0; 0.407564]; [-1.50967; 0; 0.407564]; [-1.76967; 0; 0.099168]
] m
SedHopperPline := Pline3D(SedHopperPeak)
ExtrudeSedHopper := ExtrudeLast(-W_SedBay)
SedHopperScript := stack(SedHopperPline, view("f"), ExtrudeSedHopper, view("t"))
# Manifold Ledge
SedManifoldLedge := BoxF([
    Plant_Origin[0];
    Plant_Origin[1] + W_SedBay/2 - ConRadius(ND_SedManifold);
    Z_SedManifoldPipe - ConRadius(ND_SedManifold)
], [
    Plant_Origin[0] - SocketDepth(ND_SedManifold) - CapThickness(ND_SedManifold);
    Plant_Origin[1] + W_SedBay/2 + ConRadius(ND_SedManifold);
    Z_SedManifoldPipe - ConRadius(ND_SedManifold) - T_ConcreteMin
], [0; 0; 0]*deg)
FreezeSedTank := FreezeLayer("SedTankCon")
SedConScript := stack(SedSlopeLedgeScript, SedHopperScript, SedManifoldLedge, FreezeSedTank)
# Sludge Drain Cover
SedDrainCoverLayer := layer_new("SedDrainCoverCon", ltgrey)
SedDrainCoverPline := Pline3D([
    [
        Plant_Origin[0];
        Plant_Origin[1] + W_SedBay - (W_SedBay + W_SedDrainCover)/2;
        Plant_Origin[2] + H_SedSludge
    ];
    [
        Plant_Origin[0];
        Plant_Origin[1] + W_SedBay - (W_SedBay + W_SedDrainCover)/2;
        Plant_Origin[2] + H_SedSludge + H_SedDrainCoverTotal
    ];
    [
        Plant_Origin[0];
        Plant_Origin[1] + W_SedBay - W_SedBay/2 - outerradius(ND_SedJetReverser);
        T_ConcreteMin + outerradius(ND_SedJetReverser) + H_SedSludge
    ];
    [
        Plant_Origin[0];
        Plant_Origin[1] + W_SedBay - W_SedBay/2 + outerradius(ND_SedJetReverser);
        T_ConcreteMin + outerradius(ND_SedJetReverser) + H_SedSludge
    ];
    [
        Plant_Origin[0];
        Plant_Origin[1] + W_SedBay - (W_SedBay - W_SedDrainCover)/2;
        Plant_Origin[2] + H_SedSludge + H_SedDrainCoverTotal
    ];
    [
        Plant_Origin[0];
        Plant_Origin[1] + W_SedBay - (W_SedBay - W_SedDrainCover)/2;
        Plant_Origin[2] + H_SedSludge
    ];
    [
        Plant_Origin[0];
        Plant_Origin[1] + W_SedBay - (W_SedBay + W_SedDrainCover)/2;
        Plant_Origin[2] + H_SedSludge
    ]
])
ExtrudeSedDrainCover := ExtrudeLast(-L_SedDrainCoverSegment)
SedDrainCoverBox := BoxF(Plant_Origin + [0; W_SedBay - (W_SedBay + W_SedDrainCover)/2; H_SedSludge], Plant_Origin + [0; W_SedBay - (W_SedBay + W_SedDrainCover)/2; H_SedSludge] + [-L_SedDrainCoverSegment; W_SedDrainCover; H_SedDrainCoverTotal], [0; 0; 0]*deg)
FreezeSedDrainCover := FreezeLayer("SedDrainCoverCon")
SedJetRedirect := CylinderF([0 m; W_SedBay - W_SedBay/2; H_SedSludge + T_ConcreteMin + outerradius(ND_SedJetReverser)] + Plant_Origin, outerradius(ND_SedJetReverser), L_SedDrainCoverSegment + zc, [0; 0]*deg)
N_SedDrainCoverSegmentOrifices
SedDrainCoverOrifices := CylinderF([-B_SedSludgeOrifices/2; W_SedBay - W_SedBay/2; H_SedSludge + H_SedDrainCoverTotal + zc] + Plant_Origin, D_SedSludgeOrifice/2, H_SedDrainCoverTotal + 2*zc, [0; 270]*deg)
ArraySedDrainOrifices := ArrayLast(1, N_SedDrainCoverSegmentOrifices, -B_SedSludgeOrifices)
GroupSedDrainCuts := GroupAll("DeleteMe")
SubtractSedDrainCuts := SubtractF(["SedDrainCoverCon"], "DeleteMe")
ThawSedDrainCover := SelectLayer("SedDrainCoverCon")
ArraySedDrainCover := ArrayLast(1, N_SedDrainCover, -L_SedDrainCoverSegment - S_SedDrainCoverSegment)
SedDrainCoverScript :=
    stack(SedDrainCoverLayer, SedDrainCoverBox, FreezeSedDrainCover, SedJetRedirect, SedDrainCoverOrifices, ArraySedDrainOrifices, GroupSedDrainCuts, SubtractSedDrainCuts, ThawSedDrainCover, ArraySedDrainCover, FreezeSedDrainCover) if W_SedDrainCover == outerdiameter(ND_SedJetReverser)
    stack(SedDrainCoverLayer, SedDrainCoverPline, ExtrudeSedDrainCover, FreezeSedDrainCover, SedJetRedirect, SedDrainCoverOrifices, ArraySedDrainOrifices, GroupSedDrainCuts, SubtractSedDrainCuts, ThawSedDrainCover, ArraySedDrainCover, FreezeSedDrainCover) otherwise
# Inlet Manifold
# Origins and Dimensions
SedManPipe_Origin := [
    X_SedManPipeAngledTop + ElbowRadius(ND_SedManifold)/sqrt(2);
    Plant_Origin[1] + W_SedBay/2;
    Z_SedManifoldPipe
]
X_SedManStub := Plant_Origin[0] - L_Sed + W_SedInletChannelPreWeir - S_Fitting - ConRadius(ND_SedManifold)
SedManElbow_Origin := SedManPipe_Origin
SedManCap_Origin := SedManPipe_Origin + [L_SedManifoldPipe; 0 m; 0 m]
# Manifold Pipes
SedPipeLayer := layer_new("SedPipePlu", blue)
SelectSedPipes := SelectLayer("SedPipePlu")
SedPipeFrz := FreezeLayer("SedPipePlu")
SedRemovableLayer := layer_new("SedRemovablePlu", red)
SelectSedRemovables := SelectLayer("SedRemovablePlu")
SedRemovableFrz := FreezeLayer("SedRemovablePlu")
SedManPipe := PipeSUBF(SedManPipe_Origin, L_SedManifoldPipe, [0; 180]*deg, ND_SedManifold, PS_Default, ["SedTankCon"])
L_SedManElbowPipe := W_SedBay/2 + L_ChannelSlot - ElbowRadius(ND_SedManifold) + T_PlantWall - (CouplingLength(ND_SedManifold) - SocketDepth(ND_SedManifold))
SedManElbowPipe := PipeSUBF(SedManPipe_Origin + [-ElbowRadius(ND_SedManifold); ElbowRadius(ND_SedManifold); 0 m], L_SedManElbowPipe, [270; 180]*deg, ND_SedManifold, PS_Default, ["SedTankCon"])
SedManPipeScript := stack(SedPipeLayer, SedManPipe, SedManElbowPipe, SedPipeFrz)
# Manifold Fittings
SedFittingLayer := layer_new("SedFittingPlu", green)
SelectSedFittings := SelectLayer("SedFittingPlu")
SedFittingFrz := FreezeLayer("SedFittingPlu")
SedManCap := CapF(SedManCap_Origin, [0; 0; 0]*deg, ND_SedManifold)
SedManElbow := ElbowSUBF(SedManPipe_Origin, [90; 0; 180]*deg, ND_SedManifold, PS_Default, ["SedTankCon"])
SedManCoupling := CouplingSUBF(SedManPipe_Origin + [
    -ElbowRadius(ND_SedManifold);
    W_SedBay/2 + T_PlantWall - SocketDepth(ND_SedManifold) + L_ChannelSlot;
    0 m
], [90; 0; 0]*deg, ND_SedManifold, PS_Default, ["SedTankCon"])
SedManFittingScript := stack(SedFittingLayer, SedManCap, SedManElbow, SedManCoupling, SedFittingFrz)
# Manifold Orifices
SedManOrifice := CylinderF(SedManPipe_Origin + [L_SedDiffuserOutlet/2 + T_SedDiffuserWall; 0 m; 0 m], D_SedManifoldPort/2, ND_SedManifold, [0; 270]*deg)
ArraySedManOrifice := array_all(1, N_SedManifoldPorts, B_SedManifoldPort)
SubtractFromSedPipes := SubtractF(["SedPipePlu"], "DeleteMe")
SubtractFromSedFittings := SubtractF(["SedFittingPlu"], "DeleteMe")
SedManOrificeScript := stack(SedManOrifice, ArraySedManOrifice, GroupDelete, SubtractFromSedPipes, SedManOrifice, ArraySedManOrifice, GroupDelete, SubtractFromSedFittings)
SedManifoldScript := stack(SedManPipeScript, SedManFittingScript, SedManOrificeScript)
# Exit Launder
# Origins and Dimensions
SedLaunderCoupling_Origin := [Plant_Origin[0] - L_Sed; Plant_Origin[1] + W_SedBay/2; Z_SedLaunder] = [-1.76967; 0.5334; 1.52714] m
SedLaunderPipe_Origin := [
    Plant_Origin[0] - L_Sed + S_Fitting + ConRadius(ND_SedLaunder) + ElbowRadius(ND_SedLaunder);
    Plant_Origin[1] + W_SedBay/2;
    Z_SedLaunder
]
SedLaunderCap_Origin := SedLaunderPipe_Origin + [L_SedLaunder; 0; 0]
SedLaunderNipple_Origin := SedLaunderCoupling_Origin + [CouplingLength(ND_SedLaunder) - 2*SocketDepth(ND_SedLaunder); 0 m; 0 m]
# Launder Fittings
SedLaunderEndCap := CapF(SedLaunderCap_Origin, [180; 0]*deg, ND_SedLaunder)
SedLaunderPlugCap := CapF([
    Plant_Origin[0] - L_SedChannelToWall - T_ChannelWall - CapHeight(ND_SedLaunder) + CapThickness(ND_SedLaunder);
    Plant_Origin[1] + W_SedBay/2;
    Z_SedLaunder
], [0; 0]*deg, ND_SedLaunder)
SedLaunderCoupling := CouplingSUBF(SedLaunderCoupling_Origin, [0; 180]*deg, ND_SedLaunder, PS_Default, ["SedTankCon"])
SedLaunderFittingScript :=
    stack(SelectSedFittings, SedLaunderEndCap, SedFittingFrz) if CouplingLength(ND_SedLaunder) ≥ T_ChannelWall
    stack(SelectSedFittings, SedLaunderEndCap, SedFittingFrz) otherwise
# Launder Pipes
SedLaunderPipe := PipeF(SedLaunderPipe_Origin, L_SedLaunder, [0; 180]*deg, ND_SedLaunder, PS_Default)
SedLaunderPlugNipple := PipeF([
    Plant_Origin[0] - L_SedChannelToWall - T_ChannelWall + L_SedLaunderCapExcess;
    Plant_Origin[1] + W_SedBay/2;
    Z_SedLaunder
], CapHeight(ND_SedLaunder) - CapThickness(ND_SedLaunder) + L_SedLaunderCapExcess, [0; 0]*deg, ND_SedLaunder, PS_Default)
SedLaunderNipple := PipeSUBF(SedLaunderNipple_Origin, T_ChannelWall - 2*CouplingLength(ND_SedLaunder) + 2*SocketDepth(ND_SedLaunder), [0; 180]*deg, ND_SedLaunder, PS_Default, ["SedTankCon"])
SedLaunderPipeStub := PipeSUBF(SedLaunderCoupling_Origin + [CouplingLength(ND_SedLaunder) - 2*SocketDepth(ND_SedLaunder); 0 m; 0 m], T_PlantWall - CouplingLength(ND_SedLaunder) + SocketDepth(ND_SedLaunder), [0; 180]*deg, ND_SedLaunder, PS_Default, ["SedTankCon"])
SedLaunderPipeScript :=
    stack(SelectSedPipes, SedLaunderPipe, SedPipeFrz) if CouplingLength(ND_SedLaunder) ≥ T_ChannelWall
    stack(SelectSedPipes, SedLaunderPipe, SedPipeFrz) otherwise
# Launder Orifices
SedLaunderOrifice := CylinderF([SocketDepth(ND_SedLaunder) + 1/2*B_SedLaunderOrifices; 0 m; 0 m] + SedLaunderPipe_Origin, D_SedLaunderOrifice/2, ND_SedLaunder, [0; 90]*deg)
ArraySedLaunderOrifices := array_all(1, N_SedLaunderOrifices, B_SedLaunderOrifices)
SedLaunderOrificeScript := stack(SedLaunderOrifice, ArraySedLaunderOrifices, GroupDelete, SubtractFromSedPipes, SedLaunderOrifice, ArraySedLaunderOrifices, GroupDelete, SubtractFromSedFittings)
SedLaunderScript := stack(SedLaunderFittingScript, SedLaunderPipeScript, SedLaunderOrificeScript)
# Floc Hopper Drain
# Origins
SedHopperDrainCoupling_Origin := Plant_Origin + [
    -L_Sed - T_PlantWall - SocketDepth(ND_SedHopperDrain) + CouplingLength(ND_SedHopperDrain);
    W_SedBay/2;
    outerdiameter(ND_SedHopperDrain)/2 + H_SedSludge + S_Fitting
]
L_SedHopperDrainNipple := -T_PlantWall - S_Fitting + 2*ElbowRadius(ND_FiBW) + L_FiBallValve*ND_FiBW/(2 in) + 2*SocketDepth(ND_FiBW) + ((ShortTeeLength(ND_FiManPipe) + 2*SocketDepth(ND_FiManPipe)) + ElbowRadius(ND_FiManPipe)) + S_Fitting
SedHopperDrainElbow_Origin := SedHopperDrainCoupling_Origin + [-L_SedHopperDrainNipple; 0 m; 0 m]
SedHopperDrainPipe_Origin := [
    Plant_Origin[0] - L_Sed;
    Plant_Origin[1] + W_SedBay/2;
    Plant_Origin[2] + H_SedSludge + S_Fitting + outerdiameter(ND_SedHopperDrain)/2
]
L_SedSludgeVertPipe := SedHopperDrainElbow_Origin[2] - (Z_FiInletChannelBottom - SocketDepth(ND_FiManPipe) - L_HydDisPipe - ShortTeeLength(ND_FiManPipe)) - 2*ElbowRadius(ND_SedHopperDrain) = 0.485414 m
L_SedSludgetoDrainPipe := SedHopperDrainElbow_Origin[1] - 3*ElbowRadius(ND_SedHopperDrain) - 2*SocketDepth(ND_SedHopperDrain) - (Plant_Origin[1] - 2*T_PlantWall - W_FiInletChannel - W_HumanMin)
SedHopperDrainAdapter_Origin := SedHopperDrainElbow_Origin + [
    -ElbowRadius(ND_SedHopperDrain);
    -3*ElbowRadius(ND_SedHopperDrain) - 2*SocketDepth(ND_SedHopperDrain) - L_SedSludgetoDrainPipe;
    -2*ElbowRadius(ND_SedHopperDrain) - L_SedSludgeVertPipe
]
SedHopperDrainValve_Origin := SedHopperDrainAdapter_Origin + [
    0 m;
    -MaleAdapterLength(ND_SedHopperDrain) + ValveSocket(ND_SedHopperDrain) + SocketDepth(ND_SedHopperDrain);
    0 m
]
# Hopper Drain Pipes
SedHopperDrainNipple1 := PipeF(SedHopperDrainCoupling_Origin, L_SedHopperDrainNipple, [0; 0]*deg, ND_SedHopperDrain, PS_Default)
L_SedHopperDrainPipe := T_PlantWall - CouplingLength(ND_SedHopperDrain) + SocketDepth(ND_SedHopperDrain)
SedHopperElbowPipe := PipeF(SedHopperDrainElbow_Origin + [-ElbowRadius(ND_SedHopperDrain); -ElbowRadius(ND_SedHopperDrain); 0], 2*SocketDepth(ND_SedHopperDrain), [90; 0]*deg, ND_SedHopperDrain, PS_Default)
SedHopperDrainPipe := PipeSUBF(SedHopperDrainPipe_Origin, L_SedHopperDrainPipe, [0; 0]*deg, ND_SedHopperDrain, PS_Default, ["SedTankCon"])
SedHopperVertPipe := PipeF(SedHopperDrainElbow_Origin + [
    -ElbowRadius(ND_SedHopperDrain);
    -2*ElbowRadius(ND_SedHopperDrain) - 2*SocketDepth(ND_SedHopperDrain);
    -ElbowRadius(ND_SedHopperDrain)
], L_SedSludgeVertPipe, [0; -90]*deg, ND_SedHopperDrain, PS_Default)
SedHopperHorizDrainPipe := PipeF(SedHopperDrainElbow_Origin + [
    -ElbowRadius(ND_SedHopperDrain);
    -3*ElbowRadius(ND_SedHopperDrain) - 2*SocketDepth(ND_SedHopperDrain);
    -2*ElbowRadius(ND_SedHopperDrain) - L_SedSludgeVertPipe
], L_SedSludgetoDrainPipe, [90; 0]*deg, ND_SedHopperDrain, PS_Default)
SedHopperDrainPipeScript := stack(SelectSedPipes, SedHopperDrainNipple1, SedHopperElbowPipe, SedHopperDrainPipe, SedHopperHorizDrainPipe, SedHopperVertPipe, SedPipeFrz)
SedHopperDrainNipple2
# Hopper Drain Fittings
SedValveLayer := layer_new("SedValvePlu", blue3)
SelectSedValves := SelectLayer("SedValvePlu")
SedValveFrz := FreezeLayer("SedValvePlu")
SedAdapterLayer := layer_new("SedAdapterPlu", blue2)
SelectSedAdapters := SelectLayer("SedAdapterPlu")
SedAdapterFrz := FreezeLayer("SedAdapterPlu")
SedHopperDrainCoupling := CouplingSUBF(SedHopperDrainCoupling_Origin, [0; 0]*deg, ND_SedHopperDrain, PS_Default, ["SedTankCon"])
SedHopperDrainElbow1 := ElbowF(SedHopperDrainElbow_Origin, [90; 0; 0]*deg, ND_SedHopperDrain, PS_Default)
SedHopperDrainElbow2 := ElbowF(SedHopperDrainElbow_Origin + [
    -ElbowRadius(ND_SedHopperDrain);
    -ElbowRadius(ND_SedHopperDrain) - 2*SocketDepth(ND_SedHopperDrain);
    0
], [180; 90; 0]*deg, ND_SedHopperDrain, PS_Default)
SedHopperDrainElbow3 := ElbowF(SedHopperDrainElbow_Origin + [
    -ElbowRadius(ND_SedHopperDrain);
    -3*ElbowRadius(ND_SedHopperDrain) - 2*SocketDepth(ND_SedHopperDrain);
    -2*ElbowRadius(ND_SedHopperDrain) - L_SedSludgeVertPipe
], [0; 90; 0]*deg, ND_SedHopperDrain, PS_Default)
SedHopperDrainAdapter := MaleAdapterF(SedHopperDrainAdapter_Origin, [90; 0]*deg, ND_SedHopperDrain, PS_Default)
SedHopperDrainValve := insertdwg("https://confluence.cornell.edu/download/attachments/173604905/Sed-Scaled-Gate-Valve-Threaded.dwg", SedHopperDrainValve_Origin, 2*outerradius(ND_SedHopperDrain)/(1.16 m), 2*outerradius(ND_SedHopperDrain)/(1.16 m), 90 deg)
SedHopperDrainFittingScript := stack(SelectSedFittings, SedHopperDrainCoupling, SedFittingFrz, SedValveLayer, SedHopperDrainValve, SedValveFrz, SelectSedFittings, SedHopperDrainElbow1, SedHopperDrainElbow2, SedHopperDrainElbow3, SedFittingFrz, SedAdapterLayer, SedHopperDrainAdapter, SedAdapterFrz)
SedHopperDrainScript := stack(SedHopperDrainPipeScript, SedHopperDrainFittingScript)
# Sludge Drain Plumbing
# Origins and Dimensions
SedSludgeDrainCoupling_Origin := [
    CouplingLength(ND_SedSludgePipe) - SocketDepth(ND_SedSludgePipe) - T_PlantWall - L_Sed;
    W_SedBay/2;
    H_SedSludge - outerradius(ND_SedSludgePipe)
] + Plant_Origin
SedSludgeDrainPipe_Origin := Plant_Origin + [-L_Sed + L_SedHopper + T_ConcreteMin; W_SedBay/2; H_SedSludge - outerradius(ND_SedSludgePipe)]
# the ten centimeters to ensure you can wrap your hand between two valves
L_SedSludgeValvePipe := -(SedHopperDrainElbow_Origin[0] - ElbowRadius(ND_SedHopperDrain) - ConRadius(ND_SedHopperDrain)) + (Plant_Origin[0] - L_Sed - T_PlantWall) + 10 cm
L_SedSludgeEmbeddedPipe := L_SedHopper + T_SedWeir + T_PlantWall - CouplingLength(ND_SedSludgePipe) + SocketDepth(ND_SedSludgePipe) = 0.39329 m
L_SedSludgeValvePipe2 := ValveSocket(ND_SedSludgePipe) + SocketDepth(ND_SedSludgePipe) = 0.0531922 m
SedSludgeDrainElbow1_Origin := Plant_Origin + [
    -L_Sed - T_PlantWall + SocketDepth(ND_SedSludgePipe) - L_SedSludgeValvePipe;
    W_SedBay/2;
    H_SedSludge - outerradius(ND_SedSludgePipe)
]
L_SedSludgeVertPipe := SedSludgeDrainElbow1_Origin[2] - (Z_FiInletChannelBottom - SocketDepth(ND_FiManPipe) - L_HydDisPipe - ShortTeeLength(ND_FiManPipe)) - ElbowRadius(ND_SedSludgePipe) = 0.388551 m
L_SedSludgetoDrainPipe := SedSludgeDrainElbow1_Origin[1] - ElbowRadius(ND_SedSludgePipe) - (Plant_Origin[1] - 2*T_PlantWall - W_FiInletChannel - W_HumanMin)
SedSludgeDrainAdapter_Origin := SedSludgeDrainElbow1_Origin - [
    ElbowRadius(ND_SedSludgePipe);
    ElbowRadius(ND_SedSludgePipe) + L_SedSludgetoDrainPipe;
    L_SedSludgeVertPipe + 2*ElbowRadius(ND_SedSludgePipe)
]
SedSludgeDrainValve_Origin := SedSludgeDrainAdapter_Origin + [
    0 m;
    -MaleAdapterLength(ND_SedSludgePipe) + SocketDepth(ND_SedSludgePipe) + ValveSocket(ND_SedSludgePipe);
    0 m
]
# Sludge Drain Pipes
SedSludgeValvePipe1 := PipeF(SedSludgeDrainElbow1_Origin + [L_SedSludgeValvePipe; 0; 0], L_SedSludgeValvePipe, [0; 0]*deg, ND_SedSludgePipe, PS_Default)
SedSludgePipe := PipeSUBF(SedSludgeDrainPipe_Origin, L_SedSludgeEmbeddedPipe, [0; 0]*deg, ND_SedSludgePipe, PS_Default, ["SedTankCon"])
SedSludgePipeVert := PipeF(SedSludgeDrainElbow1_Origin - [ElbowRadius(ND_SedSludgePipe); 0; ElbowRadius(ND_SedSludgePipe)], L_SedSludgeVertPipe, [0; -90]*deg, ND_SedSludgePipe, PS_Default)
SedSludgetoDCPipe := PipeF(SedSludgeDrainElbow1_Origin - [
    ElbowRadius(ND_SedSludgePipe);
    ElbowRadius(ND_SedSludgePipe);
    L_SedSludgeVertPipe + 2*ElbowRadius(ND_SedSludgePipe)
], L_SedSludgetoDrainPipe, [90; 0]*deg, ND_SedSludgePipe, PS_Default)
SedSludgeDrainPipeScript := stack(SelectSedPipes, SedSludgePipe, SedSludgeValvePipe1, SedSludgePipeVert, SedSludgetoDCPipe, SedPipeFrz)
# Sludge Drain Fittings
SedSludgeDrainAdapter := MaleAdapterF(SedSludgeDrainAdapter_Origin, [90; 0]*deg, ND_SedSludgePipe, PS_Default)
SedSludgeDrainValve := insertdwg("https://confluence.cornell.edu/download/attachments/173604905/Sed-Scaled-Gate-Valve-Threaded.dwg", SedSludgeDrainValve_Origin, 2*outerradius(ND_SedSludgePipe)/(1.16 m), 2*outerradius(ND_SedSludgePipe)/(1.16 m), 90 deg)
SedSludgeCoupling := CouplingSUBF(SedSludgeDrainCoupling_Origin, [0; 0]*deg, ND_SedSludgePipe, PS_Default, ["SedTankCon"])
SedSludgeElbow1 := ElbowF(SedSludgeDrainElbow1_Origin, [90; 0; 90]*deg, ND_SedSludgePipe, PS_Default)
SedSludgeElbow2 := ElbowF(SedSludgeDrainElbow1_Origin - [
    ElbowRadius(ND_SedSludgePipe);
    ElbowRadius(ND_SedSludgePipe);
    L_SedSludgeVertPipe + 2*ElbowRadius(ND_SedSludgePipe)
], [0; 90; 0]*deg, ND_SedSludgePipe, PS_Default)
SedSludgeDrainFittingScript := stack(SelectSedAdapters, SedSludgeDrainAdapter, SedAdapterFrz, SelectSedValves, SedSludgeDrainValve, SedValveFrz, SelectSedFittings, SedSludgeCoupling, SedSludgeElbow1, SedSludgeElbow2, SedFittingFrz)
SedSludgeDrainScript := stack(SedSludgeDrainPipeScript, SedSludgeDrainFittingScript)
# Lamella
# Origins and Dimensions
Lamina_Origin := [
    Plant_Origin[0] - cos(AN_SedPlate)*L_SedPlate;
    Plant_Origin[1];
    Z_SedLamellaBottom + Plant_Origin[2]
]
SedModCap_Origin := Lamina_Origin + [
    H_SedFrameStub/tan(AN_SedPlate) + cos(AN_SedPlate)^2*outerdiameter(ND_SedFrameStub) + ConRadius(ND_SedModulePipe)*cos(AN_SedPlate) + sin(AN_SedPlate)*(CapHeight(ND_SedModulePipe) - ConRadius(ND_SedModulePipe) + outerradius(ND_SedModulePipe));
    S_Fitting + ConRadius(ND_SedModulePipe);
    H_SedFrameStub + sin(AN_SedPlate)*cos(AN_SedPlate)*outerdiameter(ND_SedFrameStub) + ConRadius(ND_SedModulePipe)*sin(AN_SedPlate) - cos(AN_SedPlate)*(CapHeight(ND_SedModulePipe) - ConRadius(ND_SedModulePipe) + outerradius(ND_SedModulePipe))
]
SedModMirrorLineX := SedModCap_Origin[0] - (CapHeight(ND_SedModulePipe) - CapThickness(ND_SedModulePipe))*sin(AN_SedPlate) + (L_SedPlate - B_SedPlate*(N_SedModulePlates - 1)/tan(AN_SedPlate) - 2*(SedModCap_Origin[2] + (CapHeight(ND_SedModulePipe) - CapThickness(ND_SedModulePipe))*cos(AN_SedPlate) - Lamina_Origin[2])/sin(AN_SedPlate))*cos(AN_SedPlate)/2
SedModMirrorLineZ := SedModCap_Origin[2] + (CapHeight(ND_SedModulePipe) - CapThickness(ND_SedModulePipe))*cos(AN_SedPlate) + (L_SedPlate - B_SedPlate*(N_SedModulePlates - 1)/tan(AN_SedPlate) - 2*(SedModCap_Origin[2] + (CapHeight(ND_SedModulePipe) - CapThickness(ND_SedModulePipe))*cos(AN_SedPlate) - Lamina_Origin[2])/sin(AN_SedPlate))*sin(AN_SedPlate)/2
# Lamella
SedLaminaLayer := layer_new("SedModLamella", purple)
MakeSedLamina := BoxF(Lamina_Origin, Lamina_Origin + [-T_SedPlate; W_SedBay; L_SedPlate], [0; 90 deg - AN_SedPlate; 0])
ArraySedLamina := ArrayLast(1, N_SedModulePlates, -B_SedPlate/sin(AN_SedPlate))
SedLaminaFrz := FreezeLayer("SedModLamella")
SedLaminaScript := stack(SedLaminaLayer, MakeSedLamina, ArraySedLamina, SedLaminaFrz)
# Module Connector Caps
SedModCapLayer := layer_new("SedModCapPlu", red)
SedModCapRight := CapF(SedModCap_Origin, [0; 0; 0], ND_SedModulePipe)
SedModCapLeft := CapF(SedModCap_Origin - [
    B_SedPlate*(N_SedModulePlates - 1) + T_SedPlate + 2*(CapHeight(ND_SedModulePipe) - ConRadius(ND_SedModulePipe) + outerradius(ND_SedModulePipe));
    0 m;
    0 m
], [0; 180 deg; 0], ND_SedModulePipe)
SedModCapFrz := FreezeLayer("SedModCapPlu")
SedModCapScript := stack(SedModCapLayer, SedModCapRight, SedModCapLeft, SedModCapFrz)
# Module Connector Pipes and Spacers
SedModPipeLayer := layer_new("SedModPipePlu", blue3)
SedModPipe := PipeF(SedModCap_Origin, B_SedPlate*(N_SedModulePlates - 1) + T_SedPlate + 2*(CapHeight(ND_SedModulePipe) - ConRadius(ND_SedModulePipe) + outerradius(ND_SedModulePipe)), [0; 0; 0], ND_SedModulePipe, PS_Modules)
SedModPipeFrz := FreezeLayer("SedModPipePlu")
SedModSpacerLayer := layer_new("SedModSpacerPlu", blue)
SedModSpacers := PipeF(SedModCap_Origin - [CapHeight(ND_SedModulePipe) + T_SedPlate - CapThickness(ND_SedModulePipe); 0; 0], B_SedPlate - T_SedPlate, [0; 0; 0], ND_SedModulePipeSpacer, PS_Modules)
ArraySedModSpacers := ArrayLast(1, N_SedModulePlates - 1, -B_SedPlate)
SedModSpacerFrz := FreezeLayer("SedModSpacerPlu")
SedModPipeScript := stack(SedModPipeLayer, SedModPipe, SedModPipeFrz, SedModSpacerLayer, SedModSpacers, ArraySedModSpacers, SedModSpacerFrz)
# Rotate and Array Connectors and Array Modules
ThawSedModPiping := ThawMultiple(["SedMod*Plu"])
RotateSedModPiping := Rotate_All([SedModCap_Origin[0]; SedModCap_Origin[2]; SedModCap_Origin[1]], AN_SedPlate - 90 deg)
MirrorSedModPipingUp := MirrorAll([SedModMirrorLineX; SedModMirrorLineZ], [SedModMirrorLineX; SedModMirrorLineZ] + [zc; -zc/tan(AN_SedPlate)], "n")
TripleSedModPiping := array_all(3, 1, (W_SedPlate - 2*(S_Fitting + ConRadius(ND_SedModulePipe)))/2)
ThawSedModLamella := ThawMultiple(["SedModLamella"])
MirrorSedMod := Mirror3dAll("yz", [Lamina_Origin[1]; Lamina_Origin[2]], "y")
MoveSedMod := MoveAll(Lamina_Origin, Lamina_Origin - [L_SedPlate*cos(AN_SedPlate) + (N_SedModulePlates - 1)*B_SedPlate/sin(AN_SedPlate); 0 m; 0 m])
ArraySedMod := array_all(1, N_SedModules, -B_SedPlate*N_SedModulePlates/sin(AN_SedPlate))
FreezeSedModComponents := FreezeMultiple(["SedMod*"])
SedModArrayScript := stack(ThawSedModPiping, view("f"), RotateSedModPiping, MirrorSedModPipingUp, view("t"), TripleSedModPiping, ThawSedModLamella, MirrorSedMod, MoveSedMod, ArraySedMod, FreezeSedModComponents)
SedLamellaScript := stack(SedLaminaScript, SedModCapScript, SedModPipeScript, SedModArrayScript)
7
# Floc Skimmer
# Origins and Dimensions
# The floc skimmer is a 2 inch nominal diameter pipe that starts at a coupling in the wall of the sedimentation tank under the exit channel, wraps around the exit channel and ends a few centimeters below the surface of the water in the sed tank.Its purpose is to capture any flocs that pass up through the plate settlers when the cap on the top of the pipe is removed.
H_SkimmerToSurface := (HW_Sed - Z_SedLaunder - outerradius(ND_SedLaunder))/2 = -0.2225 cm
SedSkimmerCoupling_Origin := [
    Plant_Origin[0] - L_Sed - T_PlantWall + SocketDepth(ND_SedSkimmer);
    Plant_Origin[1] + W_SedBay/2 - ConRadius(ND_SedLaunder) - S_Fitting - ConRadius(ND_SedSkimmer);
    Z_SedChannelBottom - S_Fitting - ConRadius(ND_SedSkimmer)
]
SedSkimmerCap_Origin := [
    Plant_Origin[0] - L_Sed + ElbowRadius(ND_SedSkimmer) + SocketDepth(ND_SedSkimmer) + S_Fitting/2;
    SedSkimmerCoupling_Origin[1];
    Plant_Origin[2] + HW_Sed - H_SkimmerToSurface
]
SedSkimmerHorizPipe_Origin := [
    SedSkimmerCap_Origin[0] - ElbowRadius(ND_SedSkimmer);
    SedSkimmerCoupling_Origin[1];
    SedSkimmerCoupling_Origin[2]
]
SedSkimmerElbow_Origin := SedSkimmerHorizPipe_Origin + [ElbowRadius(ND_SedSkimmer); 0; ElbowRadius(ND_SedSkimmer)]
SedSkimmerVertPipe_Origin := SedSkimmerCap_Origin
# Skimmer Fittings
SedRemovablesLayer := layer_new("SedRemovablePlu", red)
SedSkimmerCap := CapF(SedSkimmerCap_Origin, [0; 270]*deg, ND_SedSkimmer)
SedSkimmerElbow := ElbowSUBF(SedSkimmerElbow_Origin, [0; 0; 270]*deg, ND_SedSkimmer, PS_Default, ["SedModLamella"])
SedSkimmerCoupling := CouplingSUBF(SedSkimmerCoupling_Origin, [0; 0; 90]*deg, ND_SedSkimmer, PS_Default, ["SedTankCon"])
SedSkimmerFittingScript := stack(SedRemovablesLayer, SedSkimmerCap, FreezeLayer("SedRemovablePlu"), SelectSedFittings, SedSkimmerElbow, SedSkimmerCoupling, SedFittingFrz)
SedSkimmerElbow_Origin[0] - SedSkimmerHorizPipe_Origin[0] = 0.0762 m
# Skimmer Pipes
SedSkimmerHorizPipe := PipeSUBF(SedSkimmerHorizPipe_Origin, SedSkimmerHorizPipe_Origin[0] - SedSkimmerCoupling_Origin[0] + CouplingLength(ND_SedSkimmer) - 2*SocketDepth(ND_SedSkimmer), [0; 0]*deg, ND_SedSkimmer, PS_Default, ["SedTankCon"])
SedSkimmerVertPipe := PipeSUBF(SedSkimmerVertPipe_Origin, SedSkimmerVertPipe_Origin[2] - SedSkimmerElbow_Origin[2], [0; -90]*deg, ND_SedSkimmer, PS_Default, ["SedModLamella"])
SedSkimmerPipeScript := stack(SelectSedPipes, SedSkimmerHorizPipe, SedSkimmerVertPipe, SedPipeFrz)
SedSkimmerScript := stack(SedSkimmerFittingScript, SedSkimmerPipeScript)
# Hopper Viewer
SedHopperViewerStub_Origin := [
    Plant_Origin[0] - L_Sed + W_SedInletChannel + 2*T_SedWeir + W_SedExitChannelPostWeir + W_SedExitChannelPreWeir/2;
    SedManPipe_Origin[1] - ConRadius(ND_SedManifold) - 2*ConRadius(ND_SedSkimmer) - 2*S_Fitting - ConRadius(ND_SedHopperViewer);
    Z_SedChannelBottom - SocketDepth(ND_SedHopperViewer)
]
SedHopperViewerCoupling_Origin := SedHopperViewerStub_Origin
SedHopperViewerPipe_Origin := SedHopperViewerCoupling_Origin + [0 m; 0 m; -CouplingLength(ND_SedHopperViewer) + 2*SocketDepth(ND_SedHopperViewer)]
SedHopperViewerStub := PipeF(SedHopperViewerStub_Origin, SocketDepth(ND_SedHopperViewer) + H_SedInletChannel, [0; 90]*deg, ND_SedHopperViewer, PS_Default)
SedHopperViewerCoupling := CouplingSUBF(SedHopperViewerCoupling_Origin, [0; 270]*deg, ND_SedHopperViewer, PS_Default, ["SedTankCon"])
SedHopperViewerPipe := PipeSUBF(SedHopperViewerPipe_Origin, T_ChannelWall - CouplingLength(ND_SedHopperViewer) + SocketDepth(ND_SedHopperViewer), [0; 270]*deg, ND_SedHopperViewer, PS_Default, ["SedTankCon"])
SedHopperViewerScript := stack(SelectSedRemovables, SedHopperViewerStub, SedRemovableFrz, SelectSedFittings, SedHopperViewerCoupling, SedFittingFrz, SelectSedPipes, SedHopperViewerPipe, SedPipeFrz)
# Complete A Single Sed Tank (array and add walls) (diffusers added later since they are not arrayed)
ThawSedBayArray := ThawMultiple(["Sed*"])
ArraySedBay := array_all(N_SedBays, 1, W_SedBay)
FreezeSedBayArray := FreezeMultiple(["Sed*"])
ArraySedBayScript := stack(ThawSedBayArray, FreezeSedModComponents, ArraySedBay, FreezeSedBayArray)
SedWall := BoxF([0 m; W_Sed; 0 m] + Plant_Origin, [-L_Sed + Plant_Origin[0]; W_Sed + T_PlantWall + Plant_Origin[1]; H_Floc], [0; 0; 0]*deg)
ArraySedWall := ArrayLast(2, 1, -W_Sed - T_PlantWall)
SedWallAboveChannel := BoxF([0 m; W_Sed; H_Sed] + Plant_Origin, [
    -L_Sed + W_SedInletChannel + W_SedExitChannel + T_ChannelWall + T_SedWeir;
    W_Sed + T_PlantWall;
    H_Sed - Z_SedChannelBottom - T_ChannelWall
] + Plant_Origin, [0; 0; 0]*deg)
SedPlateSupportLedgeScript := stack(SelectSedCon, SedWall, ArraySedWall, FreezeSedTank)
CompleteSedTank :=
    SedPlateSupportLedgeScript if N_SedBays == 1
    stack(ArraySedBayScript, SedPlateSupportLedgeScript) otherwise
# Array Sed Tanks
ThawAllSed := ThawMultiple(["Sed*"])
ArraySedTank := Array_All(N_SedTanks, 1, W_Sed + T_PlantWall)
FreezeAllSed := FreezeMultiple(["Sed*"])
SelectSedConcrete := SelectLayer("SedTankCon")
SedTankArrayScript := stack(ThawAllSed, FreezeSedModComponents, ArraySedTank, FreezeAllSed, SelectSedConcrete, BrepAll, Union_All, FreezeSedTank)
# Floc Weir Baffle and Slot
# Note: Because we had to mirror instead of array the baffle components between sed bays, this section of code only works for 1 or 2 sed bays.
# Origins and Dimensions
L_SedBaffleWedge2Y := W_SedBay/2 - outerradius(ND_SedJetReverser) - (Z_SedManifoldPipe - (Z_SedSludge + T_ConcreteMin + outerradius(ND_SedJetReverser)))/tan(AN_SedSlope) - H_SedSlotDepth/sin(AN_SedSlope) - T_ConcreteMin + H_SedSlotDepth = 0.215829 m
L_SedBaffleWedge1Y :=
    L_SedBaffleWedge2Y if N_SedBays == 1
    (H_SedSlotDepth + W_SedBay/2 - (outerradius(ND_SedJetReverser) + (Z_SedManifoldPipe - (Z_SedSludge + T_ConcreteMin + outerradius(ND_SedJetReverser)))/tan(AN_SedSlope) + H_SedSlotDepth/sin(AN_SedSlope))) otherwise
    = 0.215829 m
SedBaffleWedge1_Origin := [
    Plant_Origin[0] - L_SedDrainCoverTotal - T_ConcreteMin/2 - T_SedWeirBaffle/2;
    Plant_Origin[1] + W_SedBay/2 - outerradius(ND_SedJetReverser) - (Z_SedManifoldPipe - (Z_SedSludge + T_ConcreteMin + outerradius(ND_SedJetReverser)))/tan(AN_SedSlope) - H_SedSlotDepth/sin(AN_SedSlope);
    Z_SedSideSlopes - T_ConcreteMin*tan(AN_SedSlope)*(N_SedBays == 1)
]
SedBaffleWedge2_Origin := [
    Plant_Origin[0] - L_SedDrainCoverTotal - T_ConcreteMin/2 - T_SedWeirBaffle/2;
    Plant_Origin[1] + W_SedBay/2 + outerradius(ND_SedJetReverser) + (Z_SedManifoldPipe - (Z_SedSludge + T_ConcreteMin + outerradius(ND_SedJetReverser)))/tan(AN_SedSlope) + H_SedSlotDepth/sin(AN_SedSlope);
    Z_SedSideSlopes - T_ConcreteMin*tan(AN_SedSlope)
]
# Cutting the Baffle Slot
SedBaffleSlot1 := BoxF([
    Plant_Origin[0] - L_SedDrainCoverTotal - T_ConcreteMin/2 + T_SedWeirBaffle/2;
    Plant_Origin[1] + W_SedBay/2 - outerradius(ND_SedJetReverser) - (Z_SedManifoldPipe - (Z_SedSludge + T_ConcreteMin + outerradius(ND_SedJetReverser)))/tan(AN_SedSlope) - H_SedSlotDepth/sin(AN_SedSlope);
    Z_SedManifoldPipe
], [
    Plant_Origin[0] - L_SedDrainCoverTotal - T_ConcreteMin/2 - T_SedWeirBaffle/2;
    Plant_Origin[1] + W_SedBay/2 + outerradius(ND_SedJetReverser) + (Z_SedManifoldPipe - (Z_SedSludge + T_ConcreteMin + outerradius(ND_SedJetReverser)))/tan(AN_SedSlope) + H_SedSlotDepth/sin(AN_SedSlope);
    Plant_Origin[2] + H_Sed
], [0; 0; 0]*deg)
SedBaffleSlot2 := WedgeF(SedBaffleWedge1_Origin, [
    SedBaffleWedge1_Origin[0] - L_SedBaffleWedge1Y;
    SedBaffleWedge1_Origin[1] - T_SedWeirBaffle;
    Z_SedManifoldPipe
], [90; 0; 0]*deg)
SedBaffleSlot3 := WedgeF(SedBaffleWedge2_Origin, [
    SedBaffleWedge2_Origin[0] - L_SedBaffleWedge2Y;
    SedBaffleWedge2_Origin[1] + T_SedWeirBaffle;
    Z_SedManifoldPipe
], [270; 0; 0]*deg)
SedBaffleSlot4 := BoxF([
    Plant_Origin[0] - L_SedDrainCoverTotal - T_ConcreteMin/2 + T_SedWeirBaffle/2;
    Plant_Origin[1] + W_SedBay + H_SedSlotDepth - T_ConcreteMin;
    Z_SedSideSlopes - T_ConcreteMin*tan(AN_SedSlope)
], [
    Plant_Origin[0] - L_SedDrainCoverTotal - T_ConcreteMin/2 - T_SedWeirBaffle/2;
    Plant_Origin[1] + W_SedBay/2 + outerradius(ND_SedJetReverser) + (Z_SedManifoldPipe - (Z_SedSludge + T_ConcreteMin + outerradius(ND_SedJetReverser)))/tan(AN_SedSlope) + H_SedSlotDepth/sin(AN_SedSlope);
    Plant_Origin[2] + H_Sed
], [0; 0; 0]*deg)
SedBaffleSlot5 := BoxF([
    Plant_Origin[0] - L_SedDrainCoverTotal - T_ConcreteMin/2 + T_SedWeirBaffle/2;
    Plant_Origin[1] - H_SedSlotDepth + T_ConcreteMin*(N_SedBays == 1);
    Z_SedSideSlopes - T_ConcreteMin*tan(AN_SedSlope)*(N_SedBays == 1)
], [
    Plant_Origin[0] - L_SedDrainCoverTotal - T_ConcreteMin/2 - T_SedWeirBaffle/2;
    Plant_Origin[1] + W_SedBay/2 - outerradius(ND_SedJetReverser) - (Z_SedManifoldPipe - (Z_SedSludge + T_ConcreteMin + outerradius(ND_SedJetReverser)))/tan(AN_SedSlope) - H_SedSlotDepth/sin(AN_SedSlope);
    Plant_Origin[2] + H_Sed
], [0; 0; 0]*deg)
MirrorSedBaffleBays := MirrorAll([Plant_Origin[0]; Plant_Origin[1] + W_Sed - W_SedBay], [Plant_Origin[0] + zc; Plant_Origin[1] + W_Sed - W_SedBay], "n")
SubtractSedConCutouts := SubtractF(["SedTankCon"], "DeleteMe")
SedBaffleSlotScript := stack(SedBaffleSlot1, SedBaffleSlot2, SedBaffleSlot3, SedBaffleSlot4, SedBaffleSlot5, GroupDelete, SubtractSedConCutouts)
# Floc Weir Baffle
SedBaffleLayer := layer_new("SedBaffle", yellow)
SelectSedBaffle := SelectLayer("SedBaffle")
SedBafflePiece1 := BoxF([
    Plant_Origin[0] - L_SedDrainCoverTotal - T_ConcreteMin/2 + T_SedWeirBaffle/2;
    Plant_Origin[1] + W_SedBay/2 - outerradius(ND_SedJetReverser) - (Z_SedManifoldPipe - (Z_SedSludge + T_ConcreteMin + outerradius(ND_SedJetReverser)))/tan(AN_SedSlope) - H_SedSlotDepth/sin(AN_SedSlope);
    Z_SedManifoldPipe
], [
    Plant_Origin[0] - L_SedDrainCoverTotal - T_ConcreteMin/2 - T_SedWeirBaffle/2;
    Plant_Origin[1] + W_SedBay/2 + outerradius(ND_SedJetReverser) + (Z_SedManifoldPipe - (Z_SedSludge + T_ConcreteMin + outerradius(ND_SedJetReverser)))/tan(AN_SedSlope) + H_SedSlotDepth/sin(AN_SedSlope);
    Z_SedFlocWeir
], [0; 0; 0]*deg)
SedBafflePiece2 := WedgeF(SedBaffleWedge1_Origin, [
    SedBaffleWedge1_Origin[0] - L_SedBaffleWedge1Y;
    SedBaffleWedge1_Origin[1] - T_SedWeirBaffle;
    Z_SedManifoldPipe
], [90; 0; 0]*deg)
SedBafflePiece3 := WedgeF(SedBaffleWedge2_Origin, [
    SedBaffleWedge2_Origin[0] - L_SedBaffleWedge2Y;
    SedBaffleWedge2_Origin[1] + T_SedWeirBaffle;
    Z_SedManifoldPipe
], [270; 0; 0]*deg)
SedBafflePiece4 := BoxF([
    Plant_Origin[0] - L_SedDrainCoverTotal - T_ConcreteMin/2 + T_SedWeirBaffle/2;
    Plant_Origin[1] + W_SedBay + H_SedSlotDepth - T_ConcreteMin;
    Z_SedSideSlopes - T_ConcreteMin*tan(AN_SedSlope)
], [
    Plant_Origin[0] - L_SedDrainCoverTotal - T_ConcreteMin/2 - T_SedWeirBaffle/2;
    Plant_Origin[1] + W_SedBay/2 + outerradius(ND_SedJetReverser) + (Z_SedManifoldPipe - (Z_SedSludge + T_ConcreteMin + outerradius(ND_SedJetReverser)))/tan(AN_SedSlope) + H_SedSlotDepth/sin(AN_SedSlope);
    Z_SedFlocWeir
], [0; 0; 0]*deg)
SedBafflePiece5 := BoxF([
    Plant_Origin[0] - L_SedDrainCoverTotal - T_ConcreteMin/2 + T_SedWeirBaffle/2;
    Plant_Origin[1] - H_SedSlotDepth + T_ConcreteMin*(N_SedBays == 1);
    Z_SedSideSlopes - T_ConcreteMin*tan(AN_SedSlope)*(N_SedBays == 1)
], [
    Plant_Origin[0] - L_SedDrainCoverTotal - T_ConcreteMin/2 - T_SedWeirBaffle/2;
    Plant_Origin[1] + W_SedBay/2 - outerradius(ND_SedJetReverser) - (Z_SedManifoldPipe - (Z_SedSludge + T_ConcreteMin + outerradius(ND_SedJetReverser)))/tan(AN_SedSlope) - H_SedSlotDepth/sin(AN_SedSlope);
    Z_SedFlocWeir
], [0; 0; 0]*deg)
SedBaffleFrz := FreezeLayer("SedBaffle")
SedManifoldRestCutout := CylinderF([-L_SedDrainCoverTotal + T_ConcreteMin; W_SedBay/2; Z_SedManifoldPipe] + Plant_Origin, ConRadius(ND_SedManifold), 2*T_ConcreteMin, [0; 0]*deg)
SedBaffleSemicircleCut := SubtractF(["SedBaffle"], "DeleteMe")
SedBaffleScript := stack(SedBaffleLayer, SedBafflePiece1, SedBafflePiece2, SedBafflePiece3, SedBafflePiece4, SedBafflePiece5, Union_All, SedBaffleFrz, SedManifoldRestCutout, GroupDelete, SedBaffleSemicircleCut, SelectSedBaffle, SedBaffleFrz)
SedFlocWeirScript := stack(SedBaffleSlotScript, SedBaffleScript)
# Inlet Manifold Diffusers
SedDiffuser_Origin := [
    SedManPipe_Origin[0] + L_SedDiffuserOutlet/2 + T_SedDiffuserWall;
    SedManPipe_Origin[1];
    -innerdiameter(ND_SedManifold, PS_Default)/2 + SedManPipe_Origin[2]
]
SedDiffLayer := layer_new("SedManifoldDiffuserPlu", blue)
SedDiffOuterCircleSection := circle([SedDiffuser_Origin[0]; SedDiffuser_Origin[1]; SedDiffuser_Origin[2]], outerradius(ND_SedDiffuser))
SedDiffOuterRectangleSection := Pline3D([
    [
        SedDiffuser_Origin[0] + L_SedDiffuserOutlet/2 + T_SedDiffuserWall;
        SedDiffuser_Origin[1] + W_SedDiffuserOutlet/2 + T_SedDiffuserWall;
        SedDiffuser_Origin[2] - L_SedManifoldDiffuser
    ];
    [
        SedDiffuser_Origin[0] - L_SedDiffuserOutlet/2 - T_SedDiffuserWall;
        SedDiffuser_Origin[1] + W_SedDiffuserOutlet/2 + T_SedDiffuserWall;
        SedDiffuser_Origin[2] - L_SedManifoldDiffuser
    ];
    [
        SedDiffuser_Origin[0] - L_SedDiffuserOutlet/2 - T_SedDiffuserWall;
        SedDiffuser_Origin[1] - W_SedDiffuserOutlet/2 - T_SedDiffuserWall;
        SedDiffuser_Origin[2] - L_SedManifoldDiffuser
    ];
    [
        SedDiffuser_Origin[0] + L_SedDiffuserOutlet/2 + T_SedDiffuserWall;
        SedDiffuser_Origin[1] - W_SedDiffuserOutlet/2 - T_SedDiffuserWall;
        SedDiffuser_Origin[2] - L_SedManifoldDiffuser
    ];
    [
        SedDiffuser_Origin[0] + L_SedDiffuserOutlet/2 + T_SedDiffuserWall;
        SedDiffuser_Origin[1] + W_SedDiffuserOutlet/2 + T_SedDiffuserWall;
        SedDiffuser_Origin[2] - L_SedManifoldDiffuser
    ]
])
SedDiffZoomOuter := ZoomWindow([SedDiffuser_Origin[0] - L_SedDiffuserOutlet; SedDiffuser_Origin[1] + W_SedDiffuserOutlet], [SedDiffuser_Origin[0] + L_SedDiffuserOutlet; SedDiffuser_Origin[1] - W_SedDiffuserOutlet])
SedDiffOuterLoft := Loft([SedDiffuser_Origin[0] + outerradius(ND_SedDiffuser); SedDiffuser_Origin[1]; SedDiffuser_Origin[2]], [
    SedDiffuser_Origin[0] + L_SedDiffuserOutlet/2 + T_SedDiffuserWall;
    SedDiffuser_Origin[1] + W_SedDiffuserOutlet/2 + T_SedDiffuserWall;
    SedDiffuser_Origin[2] - L_SedManifoldDiffuser
])
SedDiffuserFreeze := FreezeLayer("SedManifoldDiffuserPlu")
SedDiffInnerCircleSection := circle([SedDiffuser_Origin[0]; SedDiffuser_Origin[1]; SedDiffuser_Origin[2]], innerdiameter(ND_SedDiffuser, PS_Default)/2)
SedDiffInnerRectangleSection := Pline3D([
    [
        SedDiffuser_Origin[0] + L_SedDiffuserOutlet/2;
        SedDiffuser_Origin[1] + W_SedDiffuserOutlet/2;
        SedDiffuser_Origin[2] - L_SedManifoldDiffuser
    ];
    [
        SedDiffuser_Origin[0] - L_SedDiffuserOutlet/2;
        SedDiffuser_Origin[1] + W_SedDiffuserOutlet/2;
        SedDiffuser_Origin[2] - L_SedManifoldDiffuser
    ];
    [
        SedDiffuser_Origin[0] - L_SedDiffuserOutlet/2;
        SedDiffuser_Origin[1] - W_SedDiffuserOutlet/2;
        SedDiffuser_Origin[2] - L_SedManifoldDiffuser
    ];
    [
        SedDiffuser_Origin[0] + L_SedDiffuserOutlet/2;
        SedDiffuser_Origin[1] - W_SedDiffuserOutlet/2;
        SedDiffuser_Origin[2] - L_SedManifoldDiffuser
    ];
    [
        SedDiffuser_Origin[0] + L_SedDiffuserOutlet/2;
        SedDiffuser_Origin[1] + W_SedDiffuserOutlet/2;
        SedDiffuser_Origin[2] - L_SedManifoldDiffuser
    ]
])
SedDiffZoomInner := ZoomWindow([SedDiffuser_Origin[0] - L_SedDiffuserOutlet; SedDiffuser_Origin[1] + W_SedDiffuserOutlet], [SedDiffuser_Origin[0] + L_SedDiffuserOutlet; SedDiffuser_Origin[1] - W_SedDiffuserOutlet])
SedDiffInnerLoft := Loft([
    SedDiffuser_Origin[0] + innerdiameter(ND_SedDiffuser, PS_Default)/2;
    SedDiffuser_Origin[1];
    SedDiffuser_Origin[2]
], [
    SedDiffuser_Origin[0] + L_SedDiffuserOutlet/2;
    SedDiffuser_Origin[1] + W_SedDiffuserOutlet/2;
    SedDiffuser_Origin[2] - L_SedManifoldDiffuser
])
SedDiffGroupInner := GroupAll("DeleteMe")
SedDiffSubtract := SubtractF(["SedManifoldDiffuserPlu"], "DeleteMe")
SedDiffSelect := SelectLayer("SedManifoldDiffuserPlu")
N_SedManifoldPorts := ceil(L_SedManifoldPipe/(L_SedDiffuserOutlet + 2*T_SedDiffuserWall))
SedDiffArray := Array_All(1, N_SedManifoldPorts, B_SedManifoldPort)
SedDiffuserScript := stack(SedDiffLayer, SedDiffOuterCircleSection, SedDiffOuterRectangleSection, SedDiffZoomOuter, SedDiffOuterLoft, SedDiffuserFreeze, SedDiffInnerCircleSection, SedDiffInnerRectangleSection, SedDiffZoomInner, SedDiffInnerLoft, SedDiffGroupInner, SedDiffSubtract, SedDiffSelect, SedDiffArray, SedDiffuserFreeze)
# Origins and Dimensions
SedOutletCoupling_Origin := [
    Plant_Origin[0] + S_Fitting + ConRadius(ND_SedLaunder) - L_Sed;
    Plant_Origin[1] - SocketDepth(ND_SedLaunder);
    Z_SedLaunder
]
SedOutletPipe_Origin := SedOutletCoupling_Origin + [0; 2*SocketDepth(ND_SedLaunder) - CouplingLength(ND_SedLaunder); 0]
L_SedOutletPipe := 2*(T_PlantWall - CouplingLength(ND_SedLaunder) + SocketDepth(ND_SedLaunder))
L_SedElbowOutletPipe := W_Sed/2 - ElbowRadius(ND_SedLaunder) + SocketDepth(ND_SedLaunder)
SedLaunderElbow_Origin := SedLaunderPipe_Origin
# Sed Outlet Fittings
SedOutletCoupling := CouplingSUBF(SedOutletCoupling_Origin, [90; 0]*deg, ND_SedLaunder, PS_Default, ["SedTankCon"])
SedOutletElbow := ElbowF(SedLaunderElbow_Origin, [-90; 180; 180]*deg, ND_SedLaunder, PS_Default)
# Sed Outlet Pipes
SedElbowOutletPipe := PipeF(SedLaunderElbow_Origin + [-ElbowRadius(ND_SedLaunder); -ElbowRadius(ND_SedLaunder); 0 m], L_SedElbowOutletPipe, [90; 0]*deg, ND_SedLaunder, PS_Default)
SedOutlePipe := PipeSUBF(SedOutletPipe_Origin, L_SedOutletPipe, [90; 0]*deg, ND_SedLaunder, PS_Default, ["SedTankCon"])
SedOutletScript := stack(SelectSedFittings, SedOutletCoupling, SedOutletElbow, SedFittingFrz, SelectSedPipes, SedOutlePipe, SedElbowOutletPipe, SedPipeFrz)
# Outlets to Filter
# Add Water Levels
SedWaterLayer := layer_new("SedWater", blue2)
SedWaterBox := BoxF(Plant_Origin, [-L_SedUpflow; W_Sed; HW_Sed] + Plant_Origin, [0; 0; 0]*deg)
SedIChannelWater := BoxF([Plant_Origin[0] - L_Sed; Plant_Origin[1]; Z_SedChannelBottom], [Plant_Origin[0] - L_Sed; Plant_Origin[1]; Z_SedChannelBottom] + [W_SedInletChannelPreWeir + T_SedWeir + W_SedInletChannelPostWeir; W_Sed; HW_SedInletChannel], [0; 0; 0]*deg)
SedEChannelWater := BoxF([
    Plant_Origin[0] - L_Sed + W_SedInletChannel + 2*T_SedWeir + W_SedExitChannelPostWeir;
    Plant_Origin[1];
    Z_SedChannelBottom
], [
    Plant_Origin[0] - L_Sed + W_SedInletChannel + T_SedWeir + W_SedExitChannel;
    Plant_Origin[1] + W_Sed;
    Z_SedChannelBottom + HW_SedExitChannel
], [0; 0; 0]*deg)
SedWaterFrz := FreezeLayer("SedWater")
SedWaterScript := stack(SedWaterLayer, SedWaterBox, SedIChannelWater, SedEChannelWater, SedWaterFrz)
# Rotating and moving the Sed tank to use if we are drawing a low flow plant
ThawAll := ThawMultiple(["Sed*"])
MirrorSed := Mirror3dAll("yz", [Plant_Origin[0]; Plant_Origin[1]], "y")
MoveSed := MoveAll(Plant_Origin, Plant_Origin + [-L_Sed; 0 m; 0 m])
FreezeAll := FreezeMultiple(["Sed*"])
AC_SedTank := stack(SedConScript, SedDrainCoverScript, SedManifoldScript, SedLaunderScript, SedHopperDrainScript, SedSludgeDrainScript, SedLamellaScript, SedSkimmerScript, SedOutletScript, CompleteSedTank, SedFlocWeirScript, SedDiffuserScript)
