# [reference: BasicInputs.xmcd]
# [reference: ExpertInputs.xmcd]
# [reference: MathFunctions.xmcd]
# [reference: PipeDatabase.xmcd]
# [reference: FluidsFunctions.xmcd]
# [reference: SedimentationTank.xmcd]
# [reference: Flocculator.xmcd]
# [reference: LFOM.xmcd]
# [reference: LinearCdc.xmcd]
# [reference: ChemStorageTanks.xmcd]
# [reference: EntranceTankabh35.xmcd]
# [reference: StackedRapidSandFilterabh35.xmcd]
# [reference: MaterialsList.xmcd]
# AutoCAD drawing programs:
# Translators:
# These are the codes that take MathCAD outputs and create AutoCAD scripts that are used to draw the plant (formerly Basics)
# [reference: MtoATranslators.xmcd]
# The wrapped MtoA translator contains the functions that the user will want to access. These functions will draw pieces with full functionality - specifying the location, dimension, and orientation of the object. Also, it contains layer control and subtraction capabilities for grouped objects.
# [reference: MtoATranslatorsWrapped.xmcd]
# Plant Elements:
# These are all of the files that draw the fundamental parts of the plants (tees, elbows, tanks, pipes, etc)
# [reference: ChannelF.xmcd]
# [reference: PlumbingF.xmcd]
# [reference: TankF.xmcd]
# [reference: StairsF.xmcd]
# [reference: DrainChannelF.xmcd]
# Specific Pieces:
# These are the codes that draw the bigger pieces of the plant (the sed tank, floc tank, etc)
# [reference: FlocculatorAC.xmcd]
# Sedimentation Tank Drawing
# Sedimentation Tank Concrete
# Side Slopes and Launder Support Ledge
SedTankLayer := layer_new("SedTankCon", grey)
SedSlopePolyline := Pline([
    [Plant_Origin[1] + W_Sed; Plant_Origin[2]] + [T_ConcreteMin; 0 m];
    [Plant_Origin[1] + W_Sed; Plant_Origin[2]] + [-W_SedBay/2 + W_SedSludge/2; 0 m];
    [Plant_Origin[1] + W_Sed; Plant_Origin[2]] + [-W_SedBay/2 + W_SedSludge/2; H_SedSludge];
    [Plant_Origin[1] + W_Sed; Plant_Origin[2]] + [-W_SedBay/2 + W_SedSludge/2 + T_SedDrainCoverLedge; H_SedSludge];
    [Plant_Origin[1] + W_Sed; Plant_Origin[2]] + [-W_SedBay/2 + W_SedSludge/2 + T_SedDrainCoverLedge; H_SedSludge + H_SedDrainCoverTotal];
    [Plant_Origin[1] + W_Sed; Plant_Origin[2]] + [0 m; Z_SedSideSlopes];
    [Plant_Origin[1] + W_Sed; 0 m] + [T_ConcreteMin; Z_SedSideSlopes];
    [Plant_Origin[1] + W_Sed; 0 m] + [T_ConcreteMin; 0 m]
])
ExtrudeSedSlopes := extrude([Plant_Origin[1] + W_Sed; Plant_Origin[2]], -L_Sed)
MirrorSedSlopes := MirrorLast([Plant_Origin[1] + W_Sed - W_SedBay/2; Plant_Origin[2]], [Plant_Origin[1] + W_Sed - W_SedBay/2; Plant_Origin[2] + zc], "n")
SedLaunderLedge := BoxF([0; W_Sed; Z_SedLaunder - ConRadius(ND_SedLaunder)] + Plant_Origin, [
    -2*SocketDepth(ND_SedLaunder);
    W_Sed - W_SedBay;
    Z_SedLaunder - ConRadius(ND_SedLaunder) - T_ConcreteMin
] + Plant_Origin, [0; 0; 0]*deg)
SedSlopeLedgeScript := stack(SedTankLayer, view("r"), SedSlopePolyline, view("r"), ExtrudeSedSlopes, MirrorSedSlopes, view("t"), SedLaunderLedge)
# Inlet and Exit Channels
ChannelVertBox := BoxF([-L_Sed + W_SedInletChannel + W_SedExitChannel + T_SedWeir; W_Sed; Z_SedChannelBottom] + Plant_Origin, [-L_Sed + W_SedInletChannel + W_SedExitChannel + T_SedWeir + T_ChannelWall; W_Sed - W_SedBay; H_Sed] + Plant_Origin, [0; 0; 0]*deg)
ChannelHorizBox := BoxF([-L_Sed; W_Sed; Z_SedChannelBottom] + Plant_Origin, [
    -L_Sed + W_SedExitChannel + T_SedWeir + W_SedInletChannel + T_ChannelWall;
    W_Sed - W_SedBay;
    Z_SedChannelBottom - T_ChannelWall
] + Plant_Origin, [0; 0; 0]*deg)
ArraySedBay := Array_All(N_SedBays, 1, -W_SedBay)
SedChannelScript := stack(ChannelVertBox, ChannelHorizBox, ArraySedBay)
# Short Wall Between Bays to Support Plates
# Note: The center ledge should be removed from the stack if the lamella pipe frame and it's support posts are drawn.
SedCenterLedge := BoxF([Plant_Origin[0]; Plant_Origin[1] + W_Sed - W_SedBay + T_ConcreteMin; Plant_Origin[2]], [Plant_Origin[0] - L_Sed; Plant_Origin[1] + W_Sed - W_SedBay - T_ConcreteMin; Z_SedLamellaBottom], [0; 0; 0]*deg)
ArraySedCenterLedge := ArrayLast(N_SedBays - 1, 1, -W_SedBay)
SedCenterLedgeScript := stack(SedCenterLedge, ArraySedCenterLedge)
# Floc Hopper Front and Back Slopes
SedHopperFrontBack := Pline([
    [Plant_Origin[0] + L_Sed; Plant_Origin[2]];
    [Plant_Origin[0] + L_Sed - L_SedHopper; Plant_Origin[2]];
    [Plant_Origin[0] + L_Sed - L_SedHopper; Z_SedManifoldPipe];
    [Plant_Origin[0] + L_Sed - L_SedHopper + T_ConcreteMin; Z_SedManifoldPipe];
    [-X_SedHopperBottom; Z_SedHopperBottom];
    [Plant_Origin[0] + L_Sed; Z_SedHopperBackSlope];
    [Plant_Origin[0] + L_Sed; Plant_Origin[2]]
])
ExtrudeSedHopperFrontBack := ExtrudeLast(W_Sed)
MoveSedHopperFrontBack := MoveLast(Plant_Origin, Plant_Origin + [0 m; W_Sed; 0 m])
SedHopperFrontBackSlopeScript := stack(view("ba"), SedHopperFrontBack, view("ba"), ExtrudeSedHopperFrontBack, view("t"))
# Tank Walls and Manifold Ledge
DrawSedTank := Tank(Plant_Origin, [L_Sed; W_Sed; H_Sed], T_PlantWall)
SedManifoldLedge := BoxF([Plant_Origin[0]; Plant_Origin[1]; Z_SedManifoldPipe - ConRadius(ND_SedManifold)], [
    Plant_Origin[0] - SocketDepth(ND_SedManifold) - CapThickness(ND_SedManifold);
    W_Sed + Plant_Origin[1];
    Z_SedManifoldPipe - ConRadius(ND_SedManifold) - T_ConcreteMin
], [0; 0; 0]*deg)
FreezeSedTank := FreezeLayer("SedTankCon")
SedTankWallScript := stack(DrawSedTank, SedManifoldLedge)
# Lamella Support Ledges
SedLowerLedge := BoxF([Plant_Origin[0] - L_SedUpflow - L_SedPlateUnderChan; Plant_Origin[1]; Z_SedLamellaBottom], [Plant_Origin[0]; Plant_Origin[1] + T_ConcreteMin; Z_SedLamellaBottom - T_ConcreteMin], [0; 0; 0]*deg)
SedUpperLedge := BoxF([Plant_Origin[0] - L_SedUpflow - L_SedPlateUnderChan; Plant_Origin[1] + W_Sed; Z_SedLamellaBottom], [Plant_Origin[0]; Plant_Origin[1] + W_Sed - T_ConcreteMin; Z_SedLamellaBottom - T_ConcreteMin], [0; 0; 0]*deg)
SedPlateSupportLedgeScript := stack(SedLowerLedge, SedUpperLedge, Union_All, FreezeSedTank)
# Inlet Manifold Rest Cutout
SedManifoldRestCutout := CylinderF([X_SedHopperBottom; Plant_Origin[1] + W_Sed - W_SedBay/2; Z_SedManifoldPipe], outerradius(ND_SedManifold), (Z_SedManifoldPipe - Z_SedHopperBottom)/tan(AN_SedHopperSlope) + T_ConcreteMin + zc, [180; 0; 0]*deg)
SubtractSedConCutouts := SubtractF(["SedTankCon"], "DeleteMe")
SedManifoldRestScript := stack(SedManifoldRestCutout, ArraySedBay, GroupDelete, SubtractSedConCutouts)
SedConScript :=
    stack(SedSlopeLedgeScript, SedChannelScript, SedHopperFrontBackSlopeScript, SedTankWallScript, SedPlateSupportLedgeScript, SedManifoldRestScript) if N_SedBays == 1
    stack(SedSlopeLedgeScript, SedChannelScript, SedCenterLedgeScript, SedHopperFrontBackSlopeScript, SedTankWallScript, SedPlateSupportLedgeScript, SedManifoldRestScript) otherwise
# Inlet Manifold
SedManVertCoupling_Origin := [
    -L_Sed + W_SedInletChannelPreWeir - T_ConcreteMin - ConRadius(ND_SedManifold);
    W_Sed - W_SedBay/2;
    Z_SedChannelBottom - SocketDepth(ND_SedManifold)
] + Plant_Origin
SedManVertPipe_Origin := [0 m; 0 m; -CouplingLength(ND_SedManifold) + 2*SocketDepth(ND_SedManifold)] + SedManVertCoupling_Origin
SedManPipe_Origin := [
    Plant_Origin[0] - L_SedUpflow - T_ConcreteMin - ConRadius(ND_SedManifold)/tan(AN_SedHopperSlope) - SocketDepth(ND_SedManifold);
    Plant_Origin[1] + W_Sed - W_SedBay/2;
    Z_SedManifoldPipe
]
SedManElbow2_Origin := SedManPipe_Origin
SedMan45Pipe_Origin := [
    SedManPipe_Origin[0] - ElbowRadius(ND_SedManifold)/sqrt(2);
    SedManPipe_Origin[1];
    SedManPipe_Origin[2] + ElbowRadius(ND_SedManifold) - ElbowRadius(ND_SedManifold)/sqrt(2)
]
L_SedMan45Pipe := sqrt(2)*(SedManPipe_Origin[0] - SedManVertCoupling_Origin[0] - ElbowRadius(ND_SedManifold)) = 0.650114 m
SedManElbow1_Origin := [
    SedManVertCoupling_Origin[0];
    SedManVertCoupling_Origin[1];
    SedMan45Pipe_Origin[2] + L_SedMan45Pipe/sqrt(2) + ElbowRadius(ND_SedManifold)/sqrt(2)
]
SedManCap_Origin := SedManPipe_Origin + [L_SedManifoldPipe; 0 m; 0 m]
SedManCouplingLayer := layer_new("SedManCouplingPlu", green)
SedManCoupling := CouplingSUBF(SedManVertCoupling_Origin, [0; 270]*deg, ND_SedManifold, PS_Default, ["SedChannelsCon"])
SedManCouplingFrz := FreezeLayer("SedManCouplingPlu")
SedManVertLayer := layer_new("SedManVertPipePlu", blue)
SedManVertPipe := PipeF(SedManVertPipe_Origin, SedManVertPipe_Origin[2] - SedManElbow1_Origin[2], [0; 270]*deg, ND_SedManifold, PS_Default)
SedManVertFrz := FreezeLayer("SedManVertPipePlu")
SedMan45Layer := layer_new("SedMan45PipePlu", blue)
SedMan45Pipe := PipeF(SedMan45Pipe_Origin, L_SedMan45Pipe, [0; 45; 0]*deg, ND_SedManifold, PS_Default)
SedMan45Frz := FreezeLayer("SedMan45PipePlu")
SedManElbowLayer := layer_new("SedManElbowPlu", green)
SedManElbow1 := Elbow45F(SedManElbow1_Origin, [180; 0; 90]*deg, ND_SedManifold, PS_Default)
SedManElbow2 := Elbow45F(SedManElbow2_Origin, [90; 0; 270]*deg, ND_SedManifold, PS_Default)
SedManElbowFrz := FreezeLayer("SedManElbowPlu")
SedManPipeLayer := layer_new("SedManPipePlu", blue)
SedManPipe := PipeF(SedManPipe_Origin, L_SedManifoldPipe, [0; 180]*deg, ND_SedManifold, PS_Default)
SedManPipeFrz := FreezeLayer("SedManPipePlu")
SedManCapLayer := layer_new("SedManCapPlu", green)
SedManCap := CapF(SedManCap_Origin, [0; 0; 0]*deg, ND_SedManifold)
SedManCapFrz := FreezeLayer("SedManCapPlu")
SedManOrifice := CylinderF([
    Plant_Origin[0] - L_Sed + L_SedHopper + L_SedDiffuserOutlet/2 + T_SedDiffuserWall;
    SedManPipe_Origin[1];
    SedManPipe_Origin[2]
], D_SedManifoldPort/2, ND_SedManifold, [0; 270]*deg)
ArraySedManOrifice := array_all(1, N_SedManifoldPorts, B_SedManifoldPort)
GroupSedManOrifices := GroupAll("DeleteMe")
CreateOrificeRow := stack(SedManOrifice, ArraySedManOrifice, GroupSedManOrifices)
SubtractSedManOrifices := stack(SubtractF(["SedManPipePlu"], "DeleteMe"), CreateOrificeRow, SubtractF(["SedManCapPlu"], "DeleteMe"))
SedManStopperLayer := layer_new("SedInletStopperPlu", blue)
SedManStopper := PipeF(SedManVertCoupling_Origin, HW_SedInletChannel + 5 cm + SocketDepth(ND_SedManifold), [0; 90]*deg, ND_SedManifold, PS_Default)
SedManStopperFrz := FreezeLayer("SedInletStopperPlu")
SedManifoldScript := stack(SedManCouplingLayer, SedManCoupling, SedManCouplingFrz, SedManVertLayer, SedManVertPipe, SedManVertFrz, SedMan45Layer, SedMan45Pipe, SedMan45Frz, SedManElbowLayer, SedManElbow1, SedManElbow2, SedManElbowFrz, SedManPipeLayer, SedManPipe, SedManPipeFrz, SedManCapLayer, SedManCap, SedManCapFrz, CreateOrificeRow, SubtractSedManOrifices, SedManStopperLayer, SedManStopper, SedManStopperFrz)
# Exit Launder
# Launder origins:
SedLaunderCoupling1_Origin := [
    Plant_Origin[0] - L_Sed + W_SedExitChannel + W_SedInletChannel + T_SedWeir + SocketDepth(ND_SedLaunder);
    Plant_Origin[1] + W_Sed - W_SedBay/2;
    Z_SedLaunder
]
SedLaunderCoupling2_Origin := [
    Plant_Origin[0] - L_SedChannelToWall - SocketDepth(ND_SedLaunder);
    Plant_Origin[1] + W_Sed - W_SedBay/2;
    Z_SedLaunder
]
SedLaunderNipple_Origin := SedLaunderCoupling1_Origin + [CouplingLength(ND_SedLaunder) - 2*SocketDepth(ND_SedLaunder); 0 m; 0 m]
SedLaunderPipe_Origin :=
    SedLaunderCoupling2_Origin if T_ChannelWall > CouplingLength(ND_SedLaunder)
    SedLaunderCoupling1_Origin + [CouplingLength(ND_SedLaunder) - 2*SocketDepth(ND_SedLaunder); 0 m; 0 m] otherwise
SedLaunderCap_Origin := SedLaunderPipe_Origin + [L_SedLaunder; 0 m; 0 m]
SedLaunderCouplingLayer := layer_new("SedLaunderCouplingPlu", green)
SedLaunderCoupling1 := CouplingSUBF(SedLaunderCoupling1_Origin, [0; 180]*deg, ND_SedLaunder, PS_Default, ["SedChannelsCon"])
SedLaunderCoupling2 := CouplingSUBF(SedLaunderCoupling2_Origin, [0; 0]*deg, ND_SedLaunder, PS_Default, ["SedChannelsCon"])
SedLaunderCouplingFrz := FreezeLayer("SedLaunderCouplingPlu")
SedLaunderNippleLayer := layer_new("SedLaunderNipplePlu", blue)
SedLaunderNipple := PipeSUBF(SedLaunderNipple_Origin, T_ChannelWall - 2*CouplingLength(ND_SedLaunder) + 2*SocketDepth(ND_SedLaunder), [0; 180]*deg, ND_SedLaunder, PS_Default, ["SedChannelsCon"])
SedLaunderNippleFrz := FreezeLayer("SedLaunderNipplePlu")
SedLaunderPipeLayer := layer_new("SedLaunderPipePlu", blue)
SedLaunderPipe := PipeF(SedLaunderPipe_Origin, L_SedLaunder, [0; 180]*deg, ND_SedLaunder, PS_Default)
SedLaunderPipeFrz := FreezeLayer("SedLaunderPipePlu")
SedLaunderCapLayer := layer_new("SedLaunderCapPlu", green)
SedLaunderCap := CapF(SedLaunderCap_Origin, [0; 0]*deg, ND_SedLaunder)
SedLaunderCapFrz := FreezeLayer("SedLaunderCapPlu")
SedLaunderOrifice := CylinderF([SocketDepth(ND_SedLaunder) + 1/2*B_SedLaunderOrifices; 0 m; 0 m] + SedLaunderPipe_Origin, D_SedLaunderOrifice/2, ND_SedLaunder, [0; 90]*deg)
ArraySedLaunderOrifices := array_all(1, N_SedLaunderOrifices, B_SedLaunderOrifices)
GroupLaunderOrifices := GroupAll("DeleteMe")
SubtractLaunderOrifices := SubtractF(["SedLaunderPipePlu"], "DeleteMe")
SedLaunderCouplingCapLayer := layer_new("SedLaunderCouplingCapPlu", green)
SedLaunderCouplingCap := CapF(SedLaunderCoupling1_Origin + [-SocketDepth(ND_SedLaunder) - CapHeight(ND_SedLaunder) + CapThickness(ND_SedLaunder); 0 m; 0 m], [180; 0]*deg, ND_SedLaunder)
SedLaunderCouplingCapNipple := PipeF(SedLaunderCoupling1_Origin + [-SocketDepth(ND_SedLaunder) + CapThickness(ND_SedLaunder) + L_SedLaunderCapExcess; 0 m; 0 m], CapHeight(ND_SedLaunder) + L_SedLaunderCapExcess, [0; 0]*deg, ND_SedLaunder, PS_Default)
SedLaunderCouplingCapFrz := FreezeLayer("SedLaunderCouplingCapPlu")
SedLaunderScript :=
    stack(SedLaunderCouplingLayer, SedLaunderCoupling1, SedLaunderCouplingFrz, SedLaunderPipeLayer, SedLaunderPipe, SedLaunderPipeFrz, SedLaunderCapLayer, SedLaunderCap, SedLaunderCapFrz, SedLaunderOrifice, ArraySedLaunderOrifices, GroupLaunderOrifices, SubtractLaunderOrifices, SedLaunderCouplingCapLayer, SedLaunderCouplingCap, SedLaunderCouplingCapNipple, SedLaunderCouplingCapFrz) if T_ChannelWall < CouplingLength(ND_SedLaunder)
    stack(SedLaunderCouplingLayer, SedLaunderCoupling1, SedLaunderCoupling2, SedLaunderCouplingFrz, SedLaunderNippleLayer, SedLaunderNipple, SedLaunderNippleFrz, SedLaunderPipeLayer, SedLaunderPipe, SedLaunderPipeFrz, SedLaunderCapLayer, SedLaunderCap, SedLaunderCapFrz, SedLaunderOrifice, ArraySedLaunderOrifices, GroupLaunderOrifices, SubtractLaunderOrifices, SedLaunderCouplingCapLayer, SedLaunderCouplingCap, SedLaunderCouplingCapNipple, SedLaunderCouplingCapFrz) otherwise
# Floc Hopper Drain
SedHopperDrainCoupling_Origin := [
    -SocketDepth(ND_SedHopperDrain) - L_Sed - T_PlantWall + CouplingLength(ND_SedHopperDrain);
    W_Sed - W_SedBay/2;
    Z_SedHopperBottom + outerradius(ND_SedHopperDrain)
] + Plant_Origin
SedHopperDrainPipe_Origin := [
    Plant_Origin[0] - L_Sed + L_SedHopperBackSlope;
    SedHopperDrainCoupling_Origin[1];
    SedHopperDrainCoupling_Origin[2]
]
SedHopperDrainAdapter1_Origin := SedHopperDrainCoupling_Origin + [-CouplingLength(ND_SedHopperDrain); 0 m; 0 m]
SedHopperDrainValve_Origin := SedHopperDrainAdapter1_Origin + [
    -MaleAdapterLength(ND_SedHopperDrain) + ValveSocket(ND_SedHopperDrain) + SocketDepth(ND_SedHopperDrain);
    0 m;
    0 m
]
SedHopperDrainAdapter2_Origin := SedHopperDrainValve_Origin + [
    ValveSocket(ND_SedHopperDrain) - ValveLength(ND_SedHopperDrain) + SocketDepth(ND_SedHopperDrain) - MaleAdapterLength(ND_SedHopperDrain);
    0 m;
    0 m
]
SedHopperDrainElbow_Origin := SedHopperDrainAdapter2_Origin + [-2*SocketDepth(ND_SedHopperDrain); 0 m; 0 m]
SedHopperDrainPipeLayer := layer_new("SedHopperDrainPipePlu", blue)
SedHopperDrainPipe := PipeSUBF(SedHopperDrainPipe_Origin, SedHopperDrainPipe_Origin[0] - SedHopperDrainCoupling_Origin[0], [0; 0]*deg, ND_SedHopperDrain, PS_Default, ["SedTankCon"])
SedHopperDrainNipple1 := PipeF(SedHopperDrainAdapter1_Origin + [2*SocketDepth(ND_SedHopperDrain); 0; 0], 2*SocketDepth(ND_SedHopperDrain), [0; 0]*deg, ND_SedHopperDrain, PS_Default)
SedHopperDrainNipple2 := PipeF(SedHopperDrainAdapter2_Origin, 2*SocketDepth(ND_SedHopperDrain), [0; 0]*deg, ND_SedHopperDrain, PS_Default)
SedHopperDrainFittingLayer := layer_new("SedHopperDrainFittingPlu", green)
SedHopperDrainCoupling := CouplingSUBF(SedHopperDrainCoupling_Origin, [0; 0]*deg, ND_SedHopperDrain, PS_Default, ["SedTankCon"])
SedHopperDrainElbow := ElbowF(SedHopperDrainElbow_Origin, [90; 0; 45]*deg, ND_SedHopperDrain, PS_Default)
SedHopperDrainAdapterLayer := layer_new("SedHopperDrainAdapterPlu", red)
SedHopperDrainAdapter1 := MaleAdapterF(SedHopperDrainAdapter1_Origin, [0; 0]*deg, ND_SedHopperDrain, PS_Default)
SedHopperDrainAdapter2 := MaleAdapterF(SedHopperDrainAdapter2_Origin, [180; 0]*deg, ND_SedHopperDrain, PS_Default)
SedHopperDrainValveLayer := layer_new("SedHopperDrainValvePlu", blue3)
SedHopperDrainValve := insertdwg("https://confluence.cornell.edu/download/attachments/173604905/VAL-Scaled-Gate-Valve-Threaded.dwg", SedHopperDrainValve_Origin, 2*outerradius(ND_SedHopperDrain)/(1.16 m), 2*outerradius(ND_SedHopperDrain)/(1.16 m), 0 deg)
SedHopperPipeWedge := WedgeF([0; outerradius(ND_SedHopperDrain); outerradius(ND_SedHopperDrain)] + SedHopperDrainPipe_Origin, [
    -2*outerradius(ND_SedHopperDrain)/tan(AN_SedSlope);
    -outerradius(ND_SedHopperDrain);
    -outerradius(ND_SedHopperDrain)
] + SedHopperDrainPipe_Origin, [0; 0; 0])
GroupSedHopperWedge := GroupAll("DeleteMe")
SubtractSedHopperWedge := SubtractF(["SedHopperDrainPipePlu"], "DeleteMe")
SedHopperDrainScript := stack(SedHopperDrainPipeLayer, SedHopperDrainPipe, SedHopperDrainNipple1, SedHopperDrainNipple2, FreezeLayer("SedHopperDrainPipePlu"), SedHopperDrainFittingLayer, SedHopperDrainCoupling, SedHopperDrainElbow, FreezeLayer("SedHopperDrainFittingPlu"), SedHopperDrainAdapterLayer, SedHopperDrainAdapter1, SedHopperDrainAdapter2, FreezeLayer("SedHopperDrainAdapterPlu"), SedHopperDrainValveLayer, SedHopperDrainValve, FreezeLayer("SedHopperDrainValvePlu"), SedHopperPipeWedge, GroupSedHopperWedge, SubtractSedHopperWedge)
# Sludge Drain Cover
SedDrainCoverLayer := layer_new("SedDrainCoverCon", ltgrey)
SedDrainCoverPline := Pline3D([
    [
        Plant_Origin[0];
        Plant_Origin[1] + W_Sed - (W_SedBay + W_SedDrainCover)/2;
        Plant_Origin[2] + H_SedSludge
    ];
    [
        Plant_Origin[0];
        Plant_Origin[1] + W_Sed - (W_SedBay + W_SedDrainCover)/2;
        Plant_Origin[2] + H_SedSludge + H_SedDrainCoverTotal
    ];
    [
        Plant_Origin[0];
        Plant_Origin[1] + W_Sed - W_SedBay/2 - outerradius(ND_SedJetReverser);
        T_ConcreteMin + outerradius(ND_SedJetReverser) + H_SedSludge
    ];
    [
        Plant_Origin[0];
        Plant_Origin[1] + W_Sed - W_SedBay/2 + outerradius(ND_SedJetReverser);
        T_ConcreteMin + outerradius(ND_SedJetReverser) + H_SedSludge
    ];
    [
        Plant_Origin[0];
        Plant_Origin[1] + W_Sed - (W_SedBay - W_SedDrainCover)/2;
        Plant_Origin[2] + H_SedSludge + H_SedDrainCoverTotal
    ];
    [
        Plant_Origin[0];
        Plant_Origin[1] + W_Sed - (W_SedBay - W_SedDrainCover)/2;
        Plant_Origin[2] + H_SedSludge
    ];
    [
        Plant_Origin[0];
        Plant_Origin[1] + W_Sed - (W_SedBay + W_SedDrainCover)/2;
        Plant_Origin[2] + H_SedSludge
    ]
])
# viewfront1
ExtrudeSedDrainCover := extrude([
    Plant_Origin[1] + W_Sed - W_SedBay/2 - outerradius(ND_SedJetReverser);
    T_ConcreteMin + outerradius(ND_SedJetReverser) + H_SedSludge
], -L_SedDrainCoverSegment)
# viewtop1
SedDrainCoverBox := BoxF(Plant_Origin + [0; W_Sed - (W_SedBay + W_SedDrainCover)/2; H_SedSludge], Plant_Origin + [0; W_Sed - (W_SedBay + W_SedDrainCover)/2; H_SedSludge] + [-L_SedDrainCoverSegment; W_SedDrainCover; H_SedDrainCoverTotal], [0; 0; 0]*deg)
FreezeSedDrainCover := FreezeLayer("SedDrainCoverCon")
SedJetRedirect := CylinderF([0 m; W_Sed - W_SedBay/2; H_SedSludge + T_ConcreteMin + outerradius(ND_SedJetReverser)] + Plant_Origin, outerradius(ND_SedJetReverser), L_SedDrainCoverSegment + zc, [0; 0]*deg)
N_SedDrainCoverSegmentOrifices
SedDrainCoverOrifices := CylinderF([-B_SedSludgeOrifices/2; W_Sed - W_SedBay/2; H_SedSludge + H_SedDrainCoverTotal + zc] + Plant_Origin, D_SedSludgeOrifice/2, H_SedDrainCoverTotal + 2*zc, [0; 270]*deg)
ArraySedDrainOrifices := ArrayLast(1, N_SedDrainCoverSegmentOrifices, -B_SedSludgeOrifices)
GroupSedDrainCuts := GroupAll("DeleteMe")
SubtractSedDrainCuts := SubtractF(["SedDrainCoverCon"], "DeleteMe")
ThawSedDrainCover := SelectLayer("SedDrainCoverCon")
ArraySedDrainCover := ArrayLast(1, N_SedDrainCover, -L_SedDrainCoverSegment - S_SedDrainCoverSegment)
SedDrainCoverScript :=
    stack(SedDrainCoverLayer, SedDrainCoverBox, FreezeSedDrainCover, SedJetRedirect, SedDrainCoverOrifices, ArraySedDrainOrifices, GroupSedDrainCuts, SubtractSedDrainCuts, ThawSedDrainCover, ArraySedDrainCover, FreezeSedDrainCover) if W_SedDrainCover == outerdiameter(ND_SedJetReverser)
    stack(SedDrainCoverLayer, SedDrainCoverPline, view("r"), ExtrudeSedDrainCover, view("t"), FreezeSedDrainCover, SedJetRedirect, SedDrainCoverOrifices, ArraySedDrainOrifices, GroupSedDrainCuts, SubtractSedDrainCuts, ThawSedDrainCover, ArraySedDrainCover, FreezeSedDrainCover) otherwise
# Lamella Pipe Frame (not currently drawn)
# Note: The pipe frame is currently not being drawn because feedback from Honduras said that it's too expensive to be worthwhile for long sed tanks. The plate settlers are just supported by a ledge.
SedPipeFrame_Origin := [
    Plant_Origin[0] - L_SedPlate*cos(60 deg) + outerradius(ND_SedFrameStub) + H_SedFrameStub/tan(60 deg);
    Plant_Origin[1];
    Z_SedLamellaBottom - outerradius(ND_SedPlateFrame)
]
B_SedPipesX := min(L_SedActive, L_Sed - W_SedExitChannel - T_ChannelWall - cos(AN_SedPlate)*L_SedPlate - 2*S_Fitting - 2*ConRadius(ND_SedManifold) - outerradius(ND_SedPlateFrame))/2
SedPipeFrameLayer := layer_new("SedPF", yellow)
PFPipeLong1 := PipeF([
    SedPipeFrame_Origin[0] - ShortTeeLength(ND_SedPlateFrame);
    Plant_Origin[1] + B_SedPlateFrameVertical;
    SedPipeFrame_Origin[2]
], B_SedPipesX - TeeLength(ND_SedPlateFrame), [0; 0]*deg, ND_SedPlateFrame, PS_Default)
PFPipeLong2 := PipeF([
    SedPipeFrame_Origin[0] - ShortTeeLength(ND_SedPlateFrame);
    Plant_Origin[1] + W_SedBay - B_SedPlateFrameVertical;
    SedPipeFrame_Origin[2]
], B_SedPipesX - TeeLength(ND_SedPlateFrame), [0; 0]*deg, ND_SedPlateFrame, PS_Default)
PFPipeMid1 := PipeF([
    SedPipeFrame_Origin[0] - 3*ShortTeeLength(ND_SedPlateFrame) - B_SedPipesX;
    Plant_Origin[1] + B_SedPlateFrameVertical;
    SedPipeFrame_Origin[2]
], B_SedPipesX - 2*TeeLength(ND_SedPlateFrame), [0; 0]*deg, ND_SedPlateFrame, PS_Default)
PFPipeMid2 := PipeF([
    SedPipeFrame_Origin[0] - 3*ShortTeeLength(ND_SedPlateFrame) - B_SedPipesX;
    Plant_Origin[1] + W_SedBay - B_SedPlateFrameVertical;
    SedPipeFrame_Origin[2]
], B_SedPipesX - 2*TeeLength(ND_SedPlateFrame), [0; 0]*deg, ND_SedPlateFrame, PS_Default)
PFPipeLeft1 := PipeF([
    SedPipeFrame_Origin[0] - 3*ShortTeeLength(ND_SedPlateFrame) - 2*B_SedPipesX;
    Plant_Origin[1] + B_SedPlateFrameVertical;
    SedPipeFrame_Origin[2]
], SedPipeFrame_Origin[0] - ShortTeeLength(ND_SedPlateFrame) - 2*B_SedPipesX - (Plant_Origin[0] - L_Sed) - TeeLength(ND_SedPlateFrame), [0; 0]*deg, ND_SedPlateFrame, PS_Default)
PFPipeLeft2 := PipeF([
    SedPipeFrame_Origin[0] - 3*ShortTeeLength(ND_SedPlateFrame) - 2*B_SedPipesX;
    Plant_Origin[1] + W_SedBay - B_SedPlateFrameVertical;
    SedPipeFrame_Origin[2]
], SedPipeFrame_Origin[0] - ShortTeeLength(ND_SedPlateFrame) - 2*B_SedPipesX - (Plant_Origin[0] - L_Sed) - TeeLength(ND_SedPlateFrame), [0; 0]*deg, ND_SedPlateFrame, PS_Default)
DrawPFStub := PipeF([
    SedPipeFrame_Origin[0];
    Plant_Origin[1] + B_SedPlateFrameVertical;
    SedPipeFrame_Origin[2] + outerradius(ND_SedPlateFrame)
], H_SedFrameStub, [0; 90]*deg, ND_SedFrameStub, 1)
ArrayPFStubRow := ArrayLast(1, N_SedModules + 1, -B_SedFrameStub)
ArrayPFStubColumn := ArrayLast(2, 1, W_SedBay - 2*B_SedPlateFrameVertical)
ArrayPFPieces := array_all(N_SedBays, 1, W_SedBay)
PipeFrameArrayPieces :=
    stack(SedPipeFrameLayer, PFPipeLong1, PFPipeLong2, PFPipeMid1, PFPipeMid2, PFPipeLeft1, PFPipeLeft2, DrawPFStub, ArrayPFStubRow, ArrayPFStubColumn) if N_SedBays == 1
    stack(SedPipeFrameLayer, PFPipeLong1, PFPipeLong2, PFPipeMid1, PFPipeMid2, PFPipeLeft1, PFPipeLeft2, DrawPFStub, ArrayPFStubRow, ArrayPFStubColumn, ArrayPFPieces) otherwise
PFPipePerpendicular := PipeF(SedPipeFrame_Origin + [0; B_SedPlateFrameVertical + ShortTeeLength(ND_SedPlateFrame); 0], W_SedBay - 2*B_SedPlateFrameVertical - TeeLength(ND_SedPlateFrame), [270; 0]*deg, ND_SedPlateFrame, PS_Default)
ArrayPFPerp := ArrayLastGen(N_SedBays, 3, W_SedBay, -B_SedPipesX)
FreezeSedPipeFrame := FreezeLayer("SedPF")
PipeFrameTeeLayer := layer_new("SedPFTee", yellow)
SedPFTee2 := TeeF(SedPipeFrame_Origin + [-B_SedPipesX; B_SedPlateFrameVertical + ShortTeeLength(ND_SedPlateFrame); 0], [0; 0; 0]*deg, ND_SedPlateFrame, PS_Default)
SedPFTee3 := TeeF(SedPipeFrame_Origin + [
    -TeeLength(ND_SedPlateFrame) - B_SedPipesX;
    B_SedPlateFrameVertical - ShortTeeLength(ND_SedPlateFrame);
    0
], [180; 0; 0]*deg, ND_SedPlateFrame, PS_Default)
ArrayPFTees := array_all(1, 2, -B_SedPipesX)
SedPFTee1 := TeeF([
    SedPipeFrame_Origin[0] - ShortTeeLength(ND_SedPlateFrame);
    Plant_Origin[1] + B_SedPlateFrameVertical;
    SedPipeFrame_Origin[2]
], [90; 0; 0]*deg, ND_SedPlateFrame, PS_Default)
MirrorPFTees := Mirror3dAll("zx", [Plant_Origin[0]; Plant_Origin[1] + 0.5*W_SedBay], "n")
ArrayPFTeeBay := array_all(N_SedBays, 1, W_SedBay)
PipeFrameTeeFrz := FreezeLayer("SedPFTee")
SedPFTees := stack(PipeFrameTeeLayer, SedPFTee2, SedPFTee3, ArrayPFTees, SedPFTee1, MirrorPFTees, ArrayPFTeeBay, PipeFrameTeeFrz)
PFSLayer := layer_new("SedPFSupport", yellow)
PFTeePipeMid :=
    Local ← PipeF([
        SedPipeFrame_Origin[0];
        Plant_Origin[1] + W_SedBay + B_SedPlateFrameVertical - ShortTeeLength(ND_SedPlateFrame);
        SedPipeFrame_Origin[2]
    ], 2*(B_SedPlateFrameVertical - ShortTeeLength(ND_SedPlateFrame)), [90; 0]*deg, ND_SedPlateFrame, PS_Default)
    for i ∈ 1 .. 2
        Local ← stack(Local, PipeF([
            SedPipeFrame_Origin[0] - TeeLength(ND_SedPlateFrame) - B_SedPipesX*i;
            Plant_Origin[1] + W_SedBay + B_SedPlateFrameVertical - ShortTeeLength(ND_SedPlateFrame);
            SedPipeFrame_Origin[2]
        ], 2*(B_SedPlateFrameVertical - ShortTeeLength(ND_SedPlateFrame)), [90; 0]*deg, ND_SedPlateFrame, PS_Default))
ArrayTeePipeMid := Array_All(N_SedBays - 1, 1, W_SedBay)
PFSFlangeArray :=
    Local ← CylinderF([
        SedPipeFrame_Origin[0];
        SedPipeFrame_Origin[1] + W_Sed - W_SedBay;
        SedPipeFrame_Origin[2] - ConRadius(ND_SedPlateFrame)
    ], D_Flange/2, T_Flange, [0; 270]*deg)
    for i ∈ 1 .. 2
        Local ← stack(Local, CylinderF([
            SedPipeFrame_Origin[0] - TeeLength(ND_SedPlateFrame) - B_SedPipesX*i;
            SedPipeFrame_Origin[1] + W_Sed - W_SedBay;
            SedPipeFrame_Origin[2] - ConRadius(ND_SedPlateFrame)
        ], D_Flange/2, T_Flange, [0; 270]*deg))
PFSPipeArray :=
    Local ← CylinderF([
        SedPipeFrame_Origin[0];
        SedPipeFrame_Origin[1] + W_SedBay;
        SedPipeFrame_Origin[2] - ConRadius(ND_SedPlateFrame) - T_Flange
    ], outerradius(ND_SedPlateFrame), SedPipeFrame_Origin[2] - ConRadius(ND_SedPlateFrame) - T_Flange - (((W_SedBay - W_SedSludge)/2 - 2*T_ConcreteMin)*tan(AN_SedSlope) + H_SedSludge + H_SedDrainCoverTotal), [0; 270]*deg)
    for i ∈ 1 .. 2
        Local ← stack(Local, CylinderF([
            SedPipeFrame_Origin[0] - TeeLength(ND_SedPlateFrame) - B_SedPipesX*i;
            SedPipeFrame_Origin[1] + W_SedBay;
            SedPipeFrame_Origin[2] - ConRadius(ND_SedPlateFrame) - T_Flange
        ], outerradius(ND_SedPlateFrame), SedPipeFrame_Origin[2] - ConRadius(ND_SedPlateFrame) - T_Flange - (((W_SedBay - W_SedSludge)/2 - 2*T_ConcreteMin)*tan(AN_SedSlope) + H_SedSludge + H_SedDrainCoverTotal), [0; 270]*deg))
FreezePFS := FreezeLayer("SedPFSupport")
PFTeePipeLayer := layer_new("SedPFTeePipes", yellow)
PFTeePipeShort :=
    Local ← PipeF([
        SedPipeFrame_Origin[0];
        Plant_Origin[1] + B_SedPlateFrameVertical - ShortTeeLength(ND_SedPlateFrame);
        SedPipeFrame_Origin[2]
    ], B_SedPlateFrameVertical - ShortTeeLength(ND_SedPlateFrame), [90; 0]*deg, ND_SedPlateFrame, PS_Default)
    for i ∈ 1 .. 2
        Local ← stack(Local, PipeF([
            SedPipeFrame_Origin[0] - TeeLength(ND_SedPlateFrame) - B_SedPipesX*i;
            Plant_Origin[1] + B_SedPlateFrameVertical - ShortTeeLength(ND_SedPlateFrame);
            SedPipeFrame_Origin[2]
        ], B_SedPlateFrameVertical - ShortTeeLength(ND_SedPlateFrame), [90; 0]*deg, ND_SedPlateFrame, PS_Default))
MirrorPFTeePipeShort := MirrorAll([Plant_Origin[0] - L_Sed/2; Plant_Origin[1] + W_Sed/2], [Plant_Origin[0] - L_Sed/2 - zc; Plant_Origin[1] + W_Sed/2], "n")
FrzPFTeePipes := FreezeLayer("SedPFTeePipes")
SedPipeFrameScript :=
    stack(SedPFTees, PipeFrameArrayPieces, PFPipePerpendicular, ArrayPFPerp, FreezeSedPipeFrame, PFSLayer, PFTeePipeMid, PFSFlangeArray, PFSPipeArray, FreezePFS, PFTeePipeLayer, PFTeePipeShort, MirrorPFTeePipeShort, FrzPFTeePipes) if (N_SedBays == 2) and (Z_SedLamellaBottom - (Plant_Origin[2] + H_SedSideSlopes + 2*ConRadius(ND_SedPlateFrame)) ≠ 0 m)
    stack(SedPFTees, PipeFrameArrayPieces, PFPipePerpendicular, ArrayPFPerp, FreezeSedPipeFrame, PFSLayer, PFTeePipeMid, ArrayTeePipeMid, PFSFlangeArray, PFSPipeArray, FreezePFS, PFTeePipeLayer, PFTeePipeShort, MirrorPFTeePipeShort, FrzPFTeePipes) if (N_SedBays > 2) and (Z_SedLamellaBottom - (Plant_Origin[2] + H_SedSideSlopes + 2*ConRadius(ND_SedPlateFrame)) ≠ 0 m)
    stack(SedPFTees, PipeFrameArrayPieces, PFPipePerpendicular, ArrayPFPerp, FreezeSedPipeFrame, PFTeePipeLayer, PFTeePipeShort, MirrorPFTeePipeShort, FrzPFTeePipes) otherwise
# Lamella
Lamina_Origin := [
    Plant_Origin[0] - cos(AN_SedPlate)*L_SedPlate;
    Plant_Origin[1] + W_Sed - W_SedBay;
    Z_SedLamellaBottom + Plant_Origin[2]
]
SedModCap_Origin := Lamina_Origin + [
    H_SedFrameStub/tan(AN_SedPlate) + cos(AN_SedPlate)^2*outerdiameter(ND_SedFrameStub) + ConRadius(ND_SedModulePipe)*cos(AN_SedPlate) + sin(AN_SedPlate)*(CapHeight(ND_SedModulePipe) - ConRadius(ND_SedModulePipe) + outerradius(ND_SedModulePipe));
    S_Fitting + ConRadius(ND_SedModulePipe);
    H_SedFrameStub + sin(AN_SedPlate)*cos(AN_SedPlate)*outerdiameter(ND_SedFrameStub) + ConRadius(ND_SedModulePipe)*sin(AN_SedPlate) - cos(AN_SedPlate)*(CapHeight(ND_SedModulePipe) - ConRadius(ND_SedModulePipe) + outerradius(ND_SedModulePipe))
]
SedLaminaLayer := layer_new("SedModLamella", purple)
MakeSedLamina := BoxF(Lamina_Origin, Lamina_Origin + [-T_SedPlate; W_SedBay; L_SedPlate], [0; 90 deg - AN_SedPlate; 0])
ArraySedLamina := ArrayLast(1, N_SedModulePlates, -B_SedPlate/sin(AN_SedPlate))
SedLaminaFrz := FreezeLayer("SedModLamella")
SedModCapLayer := layer_new("SedModCapPlu", red)
SedModCapRight := CapF(SedModCap_Origin, [0; 0; 0], ND_SedModulePipe)
SedModCapLeft := CapF(SedModCap_Origin - [
    B_SedPlate*(N_SedModulePlates - 1) + T_SedPlate + 2*(CapHeight(ND_SedModulePipe) - ConRadius(ND_SedModulePipe) + outerradius(ND_SedModulePipe));
    0 m;
    0 m
], [0; 180 deg; 0], ND_SedModulePipe)
SedModCapFrz := FreezeLayer("SedModCapPlu")
SedModPipeLayer := layer_new("SedModPipePlu", blue)
SedModPipe := PipeF(SedModCap_Origin, B_SedPlate*(N_SedModulePlates - 1) + T_SedPlate + 2*(CapHeight(ND_SedModulePipe) - ConRadius(ND_SedModulePipe) + outerradius(ND_SedModulePipe)), [0; 0; 0], ND_SedModulePipe, PS_Modules)
SedModPipeFrz := FreezeLayer("SedModPipePlu")
SedModSpacerLayer := layer_new("SedModSpacerPlu", blue)
SedModSpacers := PipeF(SedModCap_Origin - [CapHeight(ND_SedModulePipe) + T_SedPlate - CapThickness(ND_SedModulePipe); 0; 0], B_SedPlate - T_SedPlate, [0; 0; 0], ND_SedModulePipeSpacer, PS_Modules)
ArraySedModSpacers := ArrayLast(1, N_SedModulePlates - 1, -B_SedPlate)
SedModSpacerFrz := FreezeLayer("SedModSpacerPlu")
ThawSedModPiping := ThawMultiple(["SedMod*Plu"])
RotateSedModPiping := Rotate_All([SedModCap_Origin[0]; SedModCap_Origin[2]; SedModCap_Origin[1]], AN_SedPlate - 90 deg)
SedModMirrorLineX := SedModCap_Origin[0] - (CapHeight(ND_SedModulePipe) - CapThickness(ND_SedModulePipe))*sin(AN_SedPlate) + (L_SedPlate - B_SedPlate*(N_SedModulePlates - 1)/tan(AN_SedPlate) - 2*(SedModCap_Origin[2] + (CapHeight(ND_SedModulePipe) - CapThickness(ND_SedModulePipe))*cos(AN_SedPlate) - Lamina_Origin[2])/sin(AN_SedPlate))*cos(AN_SedPlate)/2
SedModMirrorLineZ := SedModCap_Origin[2] + (CapHeight(ND_SedModulePipe) - CapThickness(ND_SedModulePipe))*cos(AN_SedPlate) + (L_SedPlate - B_SedPlate*(N_SedModulePlates - 1)/tan(AN_SedPlate) - 2*(SedModCap_Origin[2] + (CapHeight(ND_SedModulePipe) - CapThickness(ND_SedModulePipe))*cos(AN_SedPlate) - Lamina_Origin[2])/sin(AN_SedPlate))*sin(AN_SedPlate)/2
MirrorSedModPipingUp := MirrorAll([SedModMirrorLineX; SedModMirrorLineZ], [SedModMirrorLineX; SedModMirrorLineZ] + [zc; -zc/tan(AN_SedPlate)], "n")
DoubleSedModPiping := array_all(2, 1, W_SedPlate - 2*(S_Fitting + ConRadius(ND_SedModulePipe)))
ThawSedModLamella := ThawMultiple(["SedModLamella"])
ArraySedMod := array_all(1, N_SedModules, -B_SedPlate*N_SedModulePlates/sin(AN_SedPlate))
FreezeSedModComponents := FreezeMultiple(["SedMod*"])
SedTankLaminaScript := stack(SedLaminaLayer, MakeSedLamina, ArraySedLamina, SedLaminaFrz, SedModCapLayer, SedModCapRight, SedModCapLeft, SedModCapFrz, SedModPipeLayer, SedModPipe, SedModPipeFrz, SedModSpacerLayer, SedModSpacers, ArraySedModSpacers, SedModSpacerFrz, ThawSedModPiping, view("f"), RotateSedModPiping, MirrorSedModPipingUp, view("t"), DoubleSedModPiping, ThawSedModLamella, ArraySedMod, FreezeSedModComponents)
# Sludge Drain
L_SedSludgeValvePipe := 2*MaleAdapterLength(ND_SedHopperDrain) + ValveLength(ND_SedHopperDrain) + ElbowRadius(ND_SedHopperDrain) + ValveLength(ND_SedSludgePipe)/2
L_SedSludgeEmbeddedPipe := L_SedHopper + T_SedWeir + T_PlantWall - CouplingLength(ND_SedSludgePipe) + SocketDepth(ND_SedSludgePipe)
SedSludgeDrainCoupling_Origin := [
    CouplingLength(ND_SedSludgePipe) - SocketDepth(ND_SedSludgePipe) - T_PlantWall - L_Sed;
    W_Sed - W_SedBay/2;
    H_SedSludge - outerradius(ND_SedSludgePipe)
] + Plant_Origin
SedSludgeDrainPipe_Origin := [
    Plant_Origin[0] - L_Sed + L_SedHopper + T_SedWeir;
    SedSludgeDrainCoupling_Origin[1];
    SedSludgeDrainCoupling_Origin[2]
]
SedSludgeDrainAdapter1_Origin := SedSludgeDrainCoupling_Origin + [
    -CouplingLength(ND_SedSludgePipe) - L_SedSludgeValvePipe + 2*SocketDepth(ND_SedSludgePipe);
    0 m;
    0 m
]
SedSludgeDrainValve_Origin := SedSludgeDrainAdapter1_Origin + [
    -MaleAdapterLength(ND_SedSludgePipe) + SocketDepth(ND_SedSludgePipe) + ValveSocket(ND_SedSludgePipe);
    0 m;
    0 m
]
SedSludgeDrainAdapter2_Origin := SedSludgeDrainValve_Origin + [
    -ValveLength(ND_SedSludgePipe) + ValveSocket(ND_SedSludgePipe) - MaleAdapterLength(ND_SedSludgePipe) + SocketDepth(ND_SedSludgePipe);
    0 m;
    0 m
]
SedSludgeDrainElbow_Origin := SedSludgeDrainAdapter2_Origin + [-2*SocketDepth(ND_SedSludgePipe); 0 m; 0 m]
SedSludgePipeLayer := layer_new("SedSludgePipePlu", blue)
SedSludgeDrainPipe := PipeSUBF(SedSludgeDrainPipe_Origin, L_SedSludgeEmbeddedPipe, [0; 0]*deg, ND_SedSludgePipe, PS_Default, ["SedTankCon"])
SedSludgeValvePipe := PipeF(SedSludgeDrainCoupling_Origin + [2*SocketDepth(ND_SedSludgePipe) - CouplingLength(ND_SedSludgePipe); 0; 0], L_SedSludgeValvePipe, [0; 0]*deg, ND_SedSludgePipe, PS_Default)
SedSludgeNipple := PipeF(SedSludgeDrainAdapter2_Origin, 2*SocketDepth(ND_SedSludgePipe), [0; 0]*deg, ND_SedSludgePipe, PS_Default)
SedSludgeFittingLayer := layer_new("SedSludgeFittingPlu", green)
SedSludgeDrainCoupling := CouplingSUBF(SedSludgeDrainCoupling_Origin, [0; 0]*deg, ND_SedSludgePipe, PS_Default, ["SedTankCon"])
SedSludgeDrainElbow := ElbowF(SedSludgeDrainElbow_Origin, [90; 0; 45]*deg, ND_SedSludgePipe, PS_Default)
SedSludgeAdapterLayer := layer_new("SedSludgeAdapterPlu", red)
SedSludgeDrainAdapter1 := MaleAdapterF(SedSludgeDrainAdapter1_Origin, [0; 0]*deg, ND_SedSludgePipe, PS_Default)
SedSludgeDrainAdapter2 := MaleAdapterF(SedSludgeDrainAdapter2_Origin, [180; 0]*deg, ND_SedSludgePipe, PS_Default)
SedSludgeValveLayer := layer_new("SedSludgeValvePlu", blue3)
SedSludgeDrainValve := insertdwg("https://confluence.cornell.edu/download/attachments/173604905/VAL-Scaled-Gate-Valve-Threaded.dwg", SedSludgeDrainValve_Origin, 2*outerradius(ND_SedSludgePipe)/(1.16 m), 2*outerradius(ND_SedSludgePipe)/(1.16 m), 0 deg)
SedSludgeScript := stack(SedSludgePipeLayer, SedSludgeDrainPipe, SedSludgeValvePipe, SedSludgeNipple, FreezeLayer("SedSludgePipePlu"), SedSludgeFittingLayer, SedSludgeDrainCoupling, SedSludgeDrainElbow, FreezeLayer("SedSludgeFittingPlu"), SedSludgeAdapterLayer, SedSludgeDrainAdapter1, SedSludgeDrainAdapter2, FreezeLayer("SedSludgeAdapterPlu"), SedSludgeValveLayer, SedSludgeDrainValve, FreezeLayer("SedSludgeValvePlu"))
# Diffuser
SedDiffuser_Origin := [
    Plant_Origin[0] - L_Sed + L_SedHopper + L_SedDiffuserOutlet/2 + T_SedDiffuserWall;
    SedManPipe_Origin[1];
    -innerdiameter(ND_SedManifold, PS_Default)/2 + SedManPipe_Origin[2]
]
SedDiffLayer := layer_new("SedManifoldDiffuserPlu", blue)
SedDiffOuterCircleSection := circle([SedDiffuser_Origin[0]; SedDiffuser_Origin[1]; SedDiffuser_Origin[2]], outerradius(ND_SedDiffuser))
SedDiffOuterRectangleSection := Pline3D([
    [
        SedDiffuser_Origin[0] + L_SedDiffuserOutlet/2 + T_SedDiffuserWall/Pi_PvcStretch;
        SedDiffuser_Origin[1] + W_SedDiffuserOutlet/2 + T_SedDiffuserWall/Pi_PvcStretch;
        SedDiffuser_Origin[2] - L_SedManifoldDiffuser
    ];
    [
        SedDiffuser_Origin[0] - L_SedDiffuserOutlet/2 - T_SedDiffuserWall/Pi_PvcStretch;
        SedDiffuser_Origin[1] + W_SedDiffuserOutlet/2 + T_SedDiffuserWall/Pi_PvcStretch;
        SedDiffuser_Origin[2] - L_SedManifoldDiffuser
    ];
    [
        SedDiffuser_Origin[0] - L_SedDiffuserOutlet/2 - T_SedDiffuserWall/Pi_PvcStretch;
        SedDiffuser_Origin[1] - W_SedDiffuserOutlet/2 - T_SedDiffuserWall/Pi_PvcStretch;
        SedDiffuser_Origin[2] - L_SedManifoldDiffuser
    ];
    [
        SedDiffuser_Origin[0] + L_SedDiffuserOutlet/2 + T_SedDiffuserWall/Pi_PvcStretch;
        SedDiffuser_Origin[1] - W_SedDiffuserOutlet/2 - T_SedDiffuserWall/Pi_PvcStretch;
        SedDiffuser_Origin[2] - L_SedManifoldDiffuser
    ];
    [
        SedDiffuser_Origin[0] + L_SedDiffuserOutlet/2 + T_SedDiffuserWall/Pi_PvcStretch;
        SedDiffuser_Origin[1] + W_SedDiffuserOutlet/2 + T_SedDiffuserWall/Pi_PvcStretch;
        SedDiffuser_Origin[2] - L_SedManifoldDiffuser
    ]
])
SedDiffZoomOuter := ZoomWindow([SedDiffuser_Origin[0] - L_SedDiffuserOutlet; SedDiffuser_Origin[1] + W_SedDiffuserOutlet], [SedDiffuser_Origin[0] + L_SedDiffuserOutlet; SedDiffuser_Origin[1] - W_SedDiffuserOutlet])
SedDiffOuterLoft := Loft([SedDiffuser_Origin[0] + outerradius(ND_SedDiffuser); SedDiffuser_Origin[1]; SedDiffuser_Origin[2]], [
    SedDiffuser_Origin[0] + L_SedDiffuserOutlet/2 + T_SedDiffuserWall/Pi_PvcStretch;
    SedDiffuser_Origin[1] + W_SedDiffuserOutlet/2 + T_SedDiffuserWall/Pi_PvcStretch;
    SedDiffuser_Origin[2] - L_SedManifoldDiffuser
])
SedDiffuserFreeze := FreezeLayer("SedManifoldDiffuserPlu")
SedDiffInnerCircleSection := circle([SedDiffuser_Origin[0]; SedDiffuser_Origin[1]; SedDiffuser_Origin[2]], innerdiameter(ND_SedDiffuser, PS_Default)/2)
SedDiffInnerRectangleSection := Pline3D([
    [
        SedDiffuser_Origin[0] + L_SedDiffuserOutlet/2;
        SedDiffuser_Origin[1] + W_SedDiffuserOutlet/2;
        SedDiffuser_Origin[2] - L_SedManifoldDiffuser
    ];
    [
        SedDiffuser_Origin[0] - L_SedDiffuserOutlet/2;
        SedDiffuser_Origin[1] + W_SedDiffuserOutlet/2;
        SedDiffuser_Origin[2] - L_SedManifoldDiffuser
    ];
    [
        SedDiffuser_Origin[0] - L_SedDiffuserOutlet/2;
        SedDiffuser_Origin[1] - W_SedDiffuserOutlet/2;
        SedDiffuser_Origin[2] - L_SedManifoldDiffuser
    ];
    [
        SedDiffuser_Origin[0] + L_SedDiffuserOutlet/2;
        SedDiffuser_Origin[1] - W_SedDiffuserOutlet/2;
        SedDiffuser_Origin[2] - L_SedManifoldDiffuser
    ];
    [
        SedDiffuser_Origin[0] + L_SedDiffuserOutlet/2;
        SedDiffuser_Origin[1] + W_SedDiffuserOutlet/2;
        SedDiffuser_Origin[2] - L_SedManifoldDiffuser
    ]
])
SedDiffZoomInner := ZoomWindow([SedDiffuser_Origin[0] - L_SedDiffuserOutlet; SedDiffuser_Origin[1] + W_SedDiffuserOutlet], [SedDiffuser_Origin[0] + L_SedDiffuserOutlet; SedDiffuser_Origin[1] - W_SedDiffuserOutlet])
SedDiffInnerLoft := Loft([
    SedDiffuser_Origin[0] + innerdiameter(ND_SedDiffuser, PS_Default)/2;
    SedDiffuser_Origin[1];
    SedDiffuser_Origin[2]
], [
    SedDiffuser_Origin[0] + L_SedDiffuserOutlet/2;
    SedDiffuser_Origin[1] + W_SedDiffuserOutlet/2;
    SedDiffuser_Origin[2] - L_SedManifoldDiffuser
])
SedDiffGroupInner := GroupAll("DeleteMe")
SedDiffSubtract := SubtractF(["SedManifoldDiffuserPlu"], "DeleteMe")
SedDiffSelect := SelectLayer("SedManifoldDiffuserPlu")
SedDiffArray := Array_All(1, N_SedManifoldPorts, B_SedManifoldPort)
SedDiffuserScript := stack(SedDiffLayer, SedDiffOuterCircleSection, SedDiffOuterRectangleSection, SedDiffZoomOuter, SedDiffOuterLoft, SedDiffuserFreeze, SedDiffInnerCircleSection, SedDiffInnerRectangleSection, SedDiffZoomInner, SedDiffInnerLoft, SedDiffGroupInner, SedDiffSubtract, SedDiffSelect, SedDiffArray, SedDiffuserFreeze)
# Floc Skimmer
# The floc skimmer is a 2 inch nominal diameter pipe that starts at a coupling in the wall of the sedimentation tank under the exit channel, wraps around the exit channel and ends a few centimeters below the surface of the water in the sed tank.Its purpose is to capture any flocs that pass up through the plate settlers when the cap on the top of the pipe is removed.
H_SkimmerToSurface := (HW_Sed - SedLaunderCoupling1_Origin[2] - outerradius(ND_SedLaunder))/2 = 1.94227 cm
S_SkimmerToLaunder := 5 cm
ND_SedSkimmer := 2 in
SedSkimmerCoupling_Origin := [
    Plant_Origin[0] - L_Sed - T_PlantWall + SocketDepth(ND_SedSkimmer);
    SedLaunderCoupling1_Origin[1] - ConRadius(ND_SedLaunder) - S_SkimmerToLaunder - ConRadius(ND_SedSkimmer);
    Plant_Origin[2] + Z_SedChannelBottom - T_ChannelWall - S_Fitting - ConRadius(ND_SedSkimmer)
]
SedSkimmerCap_Origin := [
    Plant_Origin[0] - L_Sed + W_SedExitChannel + W_SedInletChannel + T_SedWeir + T_ChannelWall + CapDiameter(ND_SedSkimmer)/2;
    SedSkimmerCoupling_Origin[1];
    Plant_Origin[2] + HW_Sed - H_SkimmerToSurface
]
SedSkimmerHorizPipe_Origin := [
    SedSkimmerCap_Origin[0] - ElbowRadius(ND_SedSkimmer);
    SedSkimmerCoupling_Origin[1];
    SedSkimmerCoupling_Origin[2]
]
SedSkimmerElbow_Origin := SedSkimmerHorizPipe_Origin + [ElbowRadius(ND_SedSkimmer); 0; ElbowRadius(ND_SedSkimmer)]
SedSkimmerVertPipe_Origin := SedSkimmerCap_Origin
SedSkimmerFittingsLayer := layer_new("SedSkimmerFittingsPlu", green)
DrawSedSkimmerCap := CapF(SedSkimmerCap_Origin, [0; -90]*deg, ND_SedSkimmer)
DrawSedSkimmerElbow := ElbowSUBF(SedSkimmerElbow_Origin, [0; 0; 270]*deg, ND_SedSkimmer, PS_Default, ["SedModLamella"])
SedSkimmerFittingsFrz := FreezeLayer("SedSkimmerFittingsPlu")
SedSkimmerCouplingLayer := layer_new("SedSkimmerCouplingPlu", green)
DrawSedSkimmerCoupling := CouplingSUBF(SedSkimmerCoupling_Origin, [0; 0; 90]*deg, ND_SedSkimmer, PS_Default, ["SedTankCon"])
SedSkimmerCouplingFrz := FreezeLayer("SedSkimmerCouplingPlu")
SedSkimmerHPipeLayer := layer_new("SedSkimmerHPipesPlu", blue)
DrawSedSkimmerHorizPipe := PipeSUBF(SedSkimmerHorizPipe_Origin, W_SedInletChannel + W_SedExitChannel + T_SedWeir + T_ChannelWall + T_PlantWall - CouplingLength(ND_SedSkimmer) + outerradius(ND_SedSkimmer) + SocketDepth(ND_SedSkimmer) - ElbowRadius(ND_SedSkimmer), [0; 0]*deg, ND_SedSkimmer, PS_Default, ["SedTankCon"])
SedSkimmerHPipeFrz := FreezeLayer("SedSkimmerHPipesPlu")
SedSkimmerVPipeLayer := layer_new("SedSkimmerVPipesPlu", blue)
DrawSedSkimmerVertPipe := PipeSUBF(SedSkimmerVertPipe_Origin, SedSkimmerVertPipe_Origin[2] - SedSkimmerElbow_Origin[2], [0; -90]*deg, ND_SedSkimmer, PS_Default, ["SedModLamella"])
SedSkimmerVPipeFrz := FreezeLayer("SedSkimmerVPipesPlu")
SedSkimmerScript := stack(SedSkimmerFittingsLayer, DrawSedSkimmerCap, DrawSedSkimmerElbow, SedSkimmerFittingsFrz, SedSkimmerCouplingLayer, DrawSedSkimmerCoupling, SedSkimmerCouplingFrz, SedSkimmerHPipeLayer, DrawSedSkimmerHorizPipe, SedSkimmerHPipeFrz, SedSkimmerVPipeLayer, DrawSedSkimmerVertPipe, SedSkimmerVPipeFrz)
# Hopper Viewer
ND_SedHopperViewer := 2 in
SedHopperViewer_Layer := layer_new("SedHopperViewerPlu", blue)
SedHopperViewer_Origin := [
    Plant_Origin[0] - L_Sed + W_SedInletChannel + 2*T_SedWeir + W_SedExitChannelPostWeir + W_SedExitChannelPreWeir/2;
    SedManVertCoupling_Origin[1] + ConRadius(ND_SedManifold) + S_Fitting;
    SedManVertCoupling_Origin[2] + SocketDepth(ND_SedManifold) - T_ChannelWall
]
SedHopperViewer := PipeSUBF(SedHopperViewer_Origin, T_ChannelWall + H_SedInletChannel, [0; 90]*deg, ND_SedHopperViewer, PS_Default, ["SedChannelsCon"])
SedHopperViewerScript := stack(SedHopperViewer_Layer, SedHopperViewer, FreezeLayer("SedHopperViewerPlu"))
# Array Sed Tanks and Bays
ThawAllSed := ThawMultiple(["Sed*"])
FreezeSedPieces := FreezeMultiple(["SedTankCon"; "SedPF*"; "SedMod*"; "SedManifoldDiffuser*"; "SedSkimmerCouplingPlu"; "SedSkimmerHPipesPlu"])
ThawSedTank := ThawMultiple(["SedTankCon"; "SedSkimmerCouplingPlu"; "SedSkimmerHPipesPlu"])
ArraySedTank := Array_All(N_SedTanks, 1, W_Sed + T_PlantWall)
FreezeAllSed := FreezeMultiple(["Sed*"])
FreezeSedTankCon := FreezeLayer("SedTankCon")
BrepSedTank := stack(ThawMultiple(["SedTankCon"]), BrepAll, FreezeMultiple(["SedTankCon"]))
# this must be done because when a solid gets too complex autocad fails to perform unions/subtractions, etc
# Finish Plumbing That Needs to Subtract from Concrete
# Floc Weir Baffle and Slot
# Note: Because we had to mirror instead of array the baffle components between sed bays, this section of code only works for 1 or 2 sed bays.
H_SedSlotDepth := 2 cm
T_SedWeirBaffle := 3 cm
L_SedBaffleWedge1Y := W_SedBay/2 - outerradius(ND_SedJetReverser) - (Z_SedManifoldPipe - (Z_SedSludge + T_ConcreteMin + outerradius(ND_SedJetReverser)))/tan(AN_SedSlope) - H_SedSlotDepth/sin(AN_SedSlope) - T_ConcreteMin + H_SedSlotDepth = 0.245251 m
L_SedBaffleWedge2Y := H_SedSlotDepth + W_SedBay/2 - (outerradius(ND_SedJetReverser) + (Z_SedManifoldPipe - (Z_SedSludge + T_ConcreteMin + outerradius(ND_SedJetReverser)))/tan(AN_SedSlope) + H_SedSlotDepth/sin(AN_SedSlope)) = 0.295251 m
SedBaffleWedge1_Origin := [
    Plant_Origin[0] - L_SedUpflow - T_ConcreteMin/2 - T_SedWeirBaffle/2;
    Plant_Origin[1] + W_Sed - W_SedBay/2 - outerradius(ND_SedJetReverser) - (Z_SedManifoldPipe - (Z_SedSludge + T_ConcreteMin + outerradius(ND_SedJetReverser)))/tan(AN_SedSlope) - H_SedSlotDepth/sin(AN_SedSlope);
    Z_SedSideSlopes - T_ConcreteMin*tan(AN_SedSlope)
]
SedBaffleWedge2_Origin := [
    Plant_Origin[0] - L_SedUpflow - T_ConcreteMin/2 - T_SedWeirBaffle/2;
    Plant_Origin[1] + W_Sed - W_SedBay/2 + outerradius(ND_SedJetReverser) + (Z_SedManifoldPipe - (Z_SedSludge + T_ConcreteMin + outerradius(ND_SedJetReverser)))/tan(AN_SedSlope) + H_SedSlotDepth/sin(AN_SedSlope);
    Z_SedSideSlopes
]
SedBaffleSlot1 := BoxF([
    Plant_Origin[0] - L_SedUpflow - T_ConcreteMin/2 + T_SedWeirBaffle/2;
    Plant_Origin[1] + W_Sed - W_SedBay/2 - outerradius(ND_SedJetReverser) - (Z_SedManifoldPipe - (Z_SedSludge + T_ConcreteMin + outerradius(ND_SedJetReverser)))/tan(AN_SedSlope) - H_SedSlotDepth/sin(AN_SedSlope);
    Z_SedManifoldPipe
], [
    Plant_Origin[0] - L_SedUpflow - T_ConcreteMin/2 - T_SedWeirBaffle/2;
    Plant_Origin[1] + W_Sed - W_SedBay/2 + outerradius(ND_SedJetReverser) + (Z_SedManifoldPipe - (Z_SedSludge + T_ConcreteMin + outerradius(ND_SedJetReverser)))/tan(AN_SedSlope) + H_SedSlotDepth/sin(AN_SedSlope);
    Plant_Origin[2] + H_Sed
], [0; 0; 0]*deg)
SedBaffleSlot2 := WedgeF(SedBaffleWedge1_Origin, [
    SedBaffleWedge1_Origin[0] - L_SedBaffleWedge1Y;
    SedBaffleWedge1_Origin[1] - T_SedWeirBaffle;
    Z_SedManifoldPipe
], [90; 0; 0]*deg)
SedBaffleSlot3 := WedgeF(SedBaffleWedge2_Origin, [
    SedBaffleWedge2_Origin[0] - L_SedBaffleWedge2Y;
    SedBaffleWedge2_Origin[1] + T_SedWeirBaffle;
    Z_SedManifoldPipe
], [270; 0; 0]*deg)
SedBaffleSlot4 := BoxF([
    Plant_Origin[0] - L_SedUpflow - T_ConcreteMin/2 + T_SedWeirBaffle/2;
    Plant_Origin[1] + W_Sed + H_SedSlotDepth;
    Z_SedSideSlopes
], [
    Plant_Origin[0] - L_SedUpflow - T_ConcreteMin/2 - T_SedWeirBaffle/2;
    Plant_Origin[1] + W_Sed - W_SedBay/2 + outerradius(ND_SedJetReverser) + (Z_SedManifoldPipe - (Z_SedSludge + T_ConcreteMin + outerradius(ND_SedJetReverser)))/tan(AN_SedSlope) + H_SedSlotDepth/sin(AN_SedSlope);
    Plant_Origin[2] + H_Sed
], [0; 0; 0]*deg)
SedBaffleSlot5 := BoxF([
    Plant_Origin[0] - L_SedUpflow - T_ConcreteMin/2 + T_SedWeirBaffle/2;
    Plant_Origin[1] + W_Sed - W_SedBay + T_ConcreteMin - H_SedSlotDepth;
    Z_SedSideSlopes - T_ConcreteMin*tan(AN_SedSlope)
], [
    Plant_Origin[0] - L_SedUpflow - T_ConcreteMin/2 - T_SedWeirBaffle/2;
    Plant_Origin[1] + W_Sed - W_SedBay/2 - outerradius(ND_SedJetReverser) - (Z_SedManifoldPipe - (Z_SedSludge + T_ConcreteMin + outerradius(ND_SedJetReverser)))/tan(AN_SedSlope) - H_SedSlotDepth/sin(AN_SedSlope);
    Plant_Origin[2] + H_Sed
], [0; 0; 0]*deg)
MirrorSedBaffleBays := MirrorAll([Plant_Origin[0]; Plant_Origin[1] + W_Sed - W_SedBay], [Plant_Origin[0] + zc; Plant_Origin[1] + W_Sed - W_SedBay], "n")
ArraySedBaffleTanks := array_all(N_SedTanks, 1, W_Sed + T_PlantWall)
SedBaffleLayer := layer_new("SedBaffle", yellow)
SedBafflePiece1 := BoxF([
    Plant_Origin[0] - L_SedUpflow - T_ConcreteMin/2 + T_SedWeirBaffle/2;
    Plant_Origin[1] + W_Sed - W_SedBay/2 - outerradius(ND_SedJetReverser) - (Z_SedManifoldPipe - (Z_SedSludge + T_ConcreteMin + outerradius(ND_SedJetReverser)))/tan(AN_SedSlope) - H_SedSlotDepth/sin(AN_SedSlope);
    Z_SedManifoldPipe
], [
    Plant_Origin[0] - L_SedUpflow - T_ConcreteMin/2 - T_SedWeirBaffle/2;
    Plant_Origin[1] + W_Sed - W_SedBay/2 + outerradius(ND_SedJetReverser) + (Z_SedManifoldPipe - (Z_SedSludge + T_ConcreteMin + outerradius(ND_SedJetReverser)))/tan(AN_SedSlope) + H_SedSlotDepth/sin(AN_SedSlope);
    Z_SedFlocWeir
], [0; 0; 0]*deg)
SedBafflePiece2 := WedgeF(SedBaffleWedge1_Origin, [
    SedBaffleWedge1_Origin[0] - L_SedBaffleWedge1Y;
    SedBaffleWedge1_Origin[1] - T_SedWeirBaffle;
    Z_SedManifoldPipe
], [90; 0; 0]*deg)
SedBafflePiece3 := WedgeF(SedBaffleWedge2_Origin, [
    SedBaffleWedge2_Origin[0] - L_SedBaffleWedge2Y;
    SedBaffleWedge2_Origin[1] + T_SedWeirBaffle;
    Z_SedManifoldPipe
], [270; 0; 0]*deg)
SedBafflePiece4 := BoxF([
    Plant_Origin[0] - L_SedUpflow - T_ConcreteMin/2 + T_SedWeirBaffle/2;
    Plant_Origin[1] + W_Sed + H_SedSlotDepth;
    Z_SedSideSlopes
], [
    Plant_Origin[0] - L_SedUpflow - T_ConcreteMin/2 - T_SedWeirBaffle/2;
    Plant_Origin[1] + W_Sed - W_SedBay/2 + outerradius(ND_SedJetReverser) + (Z_SedManifoldPipe - (Z_SedSludge + T_ConcreteMin + outerradius(ND_SedJetReverser)))/tan(AN_SedSlope) + H_SedSlotDepth/sin(AN_SedSlope);
    Z_SedFlocWeir
], [0; 0; 0]*deg)
SedBafflePiece5 := BoxF([
    Plant_Origin[0] - L_SedUpflow - T_ConcreteMin/2 + T_SedWeirBaffle/2;
    Plant_Origin[1] + W_Sed - W_SedBay + T_ConcreteMin - H_SedSlotDepth;
    Z_SedSideSlopes - T_ConcreteMin*tan(AN_SedSlope)
], [
    Plant_Origin[0] - L_SedUpflow - T_ConcreteMin/2 - T_SedWeirBaffle/2;
    Plant_Origin[1] + W_Sed - W_SedBay/2 - outerradius(ND_SedJetReverser) - (Z_SedManifoldPipe - (Z_SedSludge + T_ConcreteMin + outerradius(ND_SedJetReverser)))/tan(AN_SedSlope) - H_SedSlotDepth/sin(AN_SedSlope);
    Z_SedFlocWeir
], [0; 0; 0]*deg)
SedBaffleFrz := FreezeLayer("SedBaffle")
SedBaffleSemicircleCut := SubtractF(["SedBaffle"], "DeleteMe")
SedBaffleScript :=
    stack(view("t"), SedBaffleSlot1, SedBaffleSlot2, SedBaffleSlot3, SedBaffleSlot4, SedBaffleSlot5, ArraySedBaffleTanks, GroupDelete, SubtractSedConCutouts, SedBaffleLayer, SedBafflePiece1, SedBafflePiece2, SedBafflePiece3, SedBafflePiece4, SedBafflePiece5, Union_All, SedBaffleFrz, SedManifoldRestCutout, GroupDelete, SedBaffleSemicircleCut, SelectLayer("SedBaffle"), ArraySedBaffleTanks, SedBaffleFrz) if N_SedBays == 1
    stack(view("t"), SedBaffleSlot1, SedBaffleSlot2, SedBaffleSlot3, SedBaffleSlot4, SedBaffleSlot5, MirrorSedBaffleBays, ArraySedBaffleTanks, GroupDelete, SubtractSedConCutouts, SedBaffleLayer, SedBafflePiece1, SedBafflePiece2, SedBafflePiece3, SedBafflePiece4, SedBafflePiece5, Union_All, SedBaffleFrz, SedManifoldRestCutout, GroupDelete, SedBaffleSemicircleCut, SelectLayer("SedBaffle"), MirrorSedBaffleBays, ArraySedBaffleTanks, SedBaffleFrz) if N_SedBays == 2
# Finish Inlet and Exit Channels
# Cut channels out of tank walls
SedChannelCutout := BoxF([Plant_Origin[0] - L_Sed; Plant_Origin[1]; Z_SedChannelBottom], [
    Plant_Origin[0] - L_Sed + W_SedInletChannel + T_SedWeir + W_SedExitChannel;
    Plant_Origin[1] + N_SedTanks*W_Sed + (N_SedTanks - 1)*T_PlantWall;
    Z_SedChannelBottom + H_SedInletChannel
], [0; 0; 0]*deg)
SedInletCutout := BoxF([Plant_Origin[0] - L_Sed; Plant_Origin[1] + N_SedTanks*(W_Sed + T_PlantWall); Z_SedChannelBottom], [
    Plant_Origin[0] - L_Sed + W_SedInletChannel;
    Plant_Origin[1] + N_SedTanks*(W_Sed + T_PlantWall) - T_PlantWall;
    Z_SedChannelBottom + H_SedInletChannel
], [0; 0; 0]*deg)
SedChannelCutoutScript := stack(SedChannelCutout, SedInletCutout, GroupDelete, SubtractSedConCutouts)
# Channel Weirs and Dividing Wall
SelectSedTankLayer := SelectLayer("SedTankCon")
SedInletChannelYWeir := BoxF([
    Plant_Origin[0] - L_Sed + W_SedInletChannelPreWeir;
    Plant_Origin[1] + 2*(S_Fitting + ConRadius(ND_SedExitChannelDrain));
    Z_SedChannelBottom
], [
    Plant_Origin[0] - L_Sed + W_SedInletChannelPreWeir + T_SedWeir;
    Plant_Origin[1] - T_PlantWall + (W_SedBay*N_SedBays + T_PlantWall)*N_SedTanks;
    Z_SedChannelBottom + H_SedWeirInlet
], [0; 0; 0]*deg)
SedInletChannelXWeir := BoxF([
    Plant_Origin[0] - L_Sed + W_SedInletChannelPreWeir;
    Plant_Origin[1] + 2*(S_Fitting + ConRadius(ND_SedExitChannelDrain));
    Z_SedChannelBottom
], [
    Plant_Origin[0] - L_Sed;
    Plant_Origin[1] + 2*(S_Fitting + ConRadius(ND_SedExitChannelDrain)) + T_SedWeir;
    Z_SedChannelBottom + H_SedWeirInlet
], [0; 0; 0]*deg)
SedChannelDivider := BoxF([Plant_Origin[0] - L_Sed + W_SedInletChannel; Plant_Origin[1]; Z_SedChannelBottom], [
    Plant_Origin[0] - L_Sed + W_SedInletChannel + T_SedWeir;
    Plant_Origin[1] - T_PlantWall + (W_SedBay*N_SedBays + T_PlantWall)*N_SedTanks;
    Z_SedChannelBottom + H_SedInletChannel
], [0; 0; 0]*deg)
SedExitChannelWeirY := BoxF([
    Plant_Origin[0] - L_Sed + W_SedInletChannel + T_SedWeir + W_SedExitChannelPostWeir;
    Plant_Origin[1] + 2*S_Fitting + 2*ConRadius(ND_SedInletChannelDrain);
    Z_SedChannelBottom
], [
    Plant_Origin[0] - L_Sed + W_SedInletChannel + 2*T_SedWeir + W_SedExitChannelPostWeir;
    Plant_Origin[1] - T_PlantWall + (W_SedBay*N_SedBays + T_PlantWall)*N_SedTanks - 2*(ConRadius(ND_FiEntrancePipe) + S_Fitting);
    Z_SedChannelBottom + H_SedWeirExit
], [0; 0; 0]*deg)
SedExitChannelWeirXUpper := BoxF([
    Plant_Origin[0] - L_Sed + W_SedInletChannel + T_SedWeir + W_SedExitChannelPostWeir;
    Plant_Origin[1] - T_PlantWall + (W_SedBay*N_SedBays + T_PlantWall)*N_SedTanks - (2*(ConRadius(ND_FiEntrancePipe) + S_Fitting)) - T_SedWeir;
    Z_SedChannelBottom
], [
    Plant_Origin[0] - L_Sed + W_SedInletChannel + 2*T_SedWeir + W_SedExitChannelPostWeir + W_SedExitChannelPreWeir;
    Plant_Origin[1] - T_PlantWall + (W_SedBay*N_SedBays + T_PlantWall)*N_SedTanks - 2*(ConRadius(ND_FiEntrancePipe) + S_Fitting);
    Z_SedChannelBottom + H_SedWeirExit
], [0; 0; 0]*deg)
SedExitChannelWeirXLower := BoxF([
    Plant_Origin[0] - L_Sed + W_SedInletChannel + T_SedWeir;
    Plant_Origin[1] + 2*S_Fitting + 2*ConRadius(ND_SedInletChannelDrain);
    Z_SedChannelBottom
], [
    Plant_Origin[0] - L_Sed + W_SedInletChannel + 2*T_SedWeir + W_SedExitChannelPostWeir;
    Plant_Origin[1] + 2*S_Fitting + 2*ConRadius(ND_SedInletChannelDrain) + T_SedWeir;
    Z_SedChannelBottom + H_SedWeirExit
], [0; 0; 0]*deg)
SedChannelWeirScript := stack(SelectSedTankLayer, SedInletChannelYWeir, SedInletChannelXWeir, SedChannelDivider, SedExitChannelWeirY, SedExitChannelWeirXUpper, SedExitChannelWeirXLower, Union_All, FreezeSedTank)
FinishSedChannelScript := stack(SedChannelCutoutScript, SedChannelWeirScript)
# Inlet Channel Drain
SedIChannelDrainVertCoupling_Origin := [
    Plant_Origin[0] - L_Sed - T_PlantWall + max(T_PlantWall, CouplingLength(ND_SedInletChannelDrain)) + SocketDepth(ND_SedInletChannelDrain) + ShortTeeLength(ND_SedInletChannelDrain);
    Plant_Origin[1] + S_Fitting + ConRadius(ND_SedInletChannelDrain);
    Plant_Origin[2] + Z_SedChannelBottom - CouplingLength(ND_SedInletChannelDrain) + SocketDepth(ND_SedInletChannelDrain)
]
SedEChannelDrainVertCoupling_Origin := [
    Plant_Origin[0] - L_Sed + max(W_SedInletChannel + T_SedWeir + S_Fitting + ConRadius(ND_SedInletChannelDrain), T_PlantWall + max(T_PlantWall, CouplingLength(ND_SedInletChannelDrain)) + 3*SocketDepth(ND_SedInletChannelDrain) + TeeLength(ND_SedInletChannelDrain));
    SedIChannelDrainVertCoupling_Origin[1];
    Plant_Origin[2] + Z_SedChannelBottom - CouplingLength(ND_SedInletChannelDrain) + SocketDepth(ND_SedInletChannelDrain)
]
SedIChannelDrainVertCouplingLayer := layer_new("SedIChannelVertCouplingPlu", green)
SedIChannelDrainVerCoupling := CouplingSUBF(SedIChannelDrainVertCoupling_Origin, [0; 90; 0]*deg, ND_SedInletChannelDrain, PS_Default, ["SedChannelsCon"])
SedIChannelVertCouplingFrz := FreezeLayer("SedIChannelVertCouplingPlu")
L_SedIChannelVertPipe := Z_SedChannelBottom - CouplingLength(ND_SedExitChannelDrain) - ShortTeeLength(ND_SedExitChannelDrain) - ConRadius(ND_SedExitChannelDrain)
L_SedIChannelHorizPipe := SedIChannelDrainVertCoupling_Origin[0] - (Plant_Origin[0] - L_Sed - T_PlantWall) - CouplingLength(ND_SedExitChannelDrain) - ShortTeeLength(ND_SedExitChannelDrain) + SocketDepth(ND_SedExitChannelDrain)
SedIChannelDrainPipeLayer := layer_new("SedIChannelPipePlu", blue)
SedIChannelDrainVertPipe := PipeSUBF(SedIChannelDrainVertCoupling_Origin, L_SedIChannelVertPipe, [0; 270; 0]*deg, ND_SedInletChannelDrain, PS_Default, ["SedTankCon"])
SedIChannelDrainHorizPipe := PipeSUBF([
    SedIChannelDrainVertCoupling_Origin[0] - ShortTeeLength(ND_SedInletChannelDrain);
    SedIChannelDrainVertCoupling_Origin[1];
    SedIChannelDrainVertCoupling_Origin[2] - L_SedIChannelVertPipe - ShortTeeLength(ND_SedInletChannelDrain)
], L_SedIChannelHorizPipe, [0; 0; 0]*deg, ND_SedInletChannelDrain, PS_Default, ["SedTankCon"])
SedIChannelPipeFrz := FreezeLayer("SedIChannelPipePlu")
SedIChannelTeeLayer := layer_new("SedIChannelTeePlu", green)
SedIChannelDrainTee := TeeSUBF(SedIChannelDrainVertCoupling_Origin + [0 m; 0 m; -L_SedIChannelVertPipe], [0; 0; 90]*deg, ND_SedExitChannelDrain, PS_Default, ["SedTankCon"])
SedIChannelTeeFrz := FreezeLayer("SedIChannelTeePlu")
SedInletDrainScript := stack(SedIChannelDrainVertCouplingLayer, SedIChannelDrainVerCoupling, SedIChannelVertCouplingFrz, SedIChannelDrainPipeLayer, SedIChannelDrainVertPipe, SedIChannelDrainHorizPipe, SedIChannelPipeFrz, SedIChannelTeeLayer, SedIChannelDrainTee, SedIChannelTeeFrz) = [
    "-layer m SedIChannelVertCouplingPlu";
    "c t 0,255,0";
    "SedIChannelVertCouplingPlu";
    "  ";
    "_zoom w -6.18205,0.04,1.49017 -5.84455,0.24415,1.30602";
    "_cylinder -6.0133,0.14208,1.39809 0.09207 a -5.9563,0.14208,1.39809";
    "_cylinder -6.11505,0.14208,1.39809 0.09207 a -6.05805,0.14208,1.39809";
    "_cylinder -6.05805,0.14208,1.39809 0.08414 a -6.0133,0.14208,1.39809";
    "_union -5.9563,0.05,1.39809 -6.11505,0.05,1.39809 -6.0133,0.05794,1.39809 ";
    "rotate3d l  y -6.0133,0.14208,1.39809 90"
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]
# Exit Channel Drain
SedEChannelDrainVertCouplingLayer := layer_new("SedEChannelVertCouplingPlu", green)
SedEChannelDrainVertCoupling := CouplingSUBF(SedEChannelDrainVertCoupling_Origin, [0; 90; 0]*deg, ND_SedExitChannelDrain, PS_Default, ["SedChannelsCon"])
SedEChannelVertCouplingFrz := FreezeLayer("SedEChannelVertCouplingPlu")
L_SedEChannelVertPipe := Z_SedChannelBottom - CouplingLength(ND_SedInletChannelDrain) - ElbowRadius(ND_SedInletChannelDrain) - ConRadius(ND_SedInletChannelDrain)
SedEChannelDrainVertPipeLayer := layer_new("SedEChannelVertPipePlu", blue)
SedEChannelDrainVertPipe := PipeSUBF(SedEChannelDrainVertCoupling_Origin, L_SedEChannelVertPipe, [0; 270; 0]*deg, ND_SedExitChannelDrain, PS_Default, ["SedTankCon"])
SedEChannelVertPipeFrz := FreezeLayer("SedEChannelVertPipePlu")
SedEChannelElbowLayer := layer_new("SedEChannelElbowPlu", green)
SedEChannelDrainElbow := ElbowSUBF(SedEChannelDrainVertCoupling_Origin + [0 m; 0 m; -L_SedEChannelVertPipe], [0; 0; 270]*deg, ND_SedInletChannelDrain, PS_Default, ["SedTankCon"])
SedEChannelElbowFrz := FreezeLayer("SedEChannelElbowPlu")
L_SedEChannelHorizPipe := SedEChannelDrainVertCoupling_Origin[0] - SedIChannelDrainVertCoupling_Origin[0] - ShortTeeLength(ND_SedInletChannelDrain) - ElbowRadius(ND_SedInletChannelDrain)
SedEChannelHorizPipeLayer := layer_new("SedEChannelHorizPipePlu", blue)
SedEChannelHorizPipe := PipeSUBF([
    SedEChannelDrainVertCoupling_Origin[0] - ElbowRadius(ND_SedInletChannelDrain);
    SedEChannelDrainVertCoupling_Origin[1];
    -L_SedEChannelVertPipe - ElbowRadius(ND_SedExitChannelDrain) + SedEChannelDrainVertCoupling_Origin[2]
], L_SedEChannelHorizPipe, [0; 0; 0]*deg, ND_SedExitChannelDrain, PS_Default, ["SedTankCon"])
SedEChannelHorizPipeFrz := FreezeLayer("SedEChannelHorizPipePlu")
SedEChannelHorizCouplingLayer := layer_new("SedEChannelHorizCouplingPlu", green)
SedEChannelHorizCoupling := CouplingSUBF([
    Plant_Origin[0] - T_PlantWall - SocketDepth(ND_SedExitChannelDrain) - L_Sed + CouplingLength(ND_SedExitChannelDrain);
    SedEChannelDrainVertCoupling_Origin[1];
    SedEChannelDrainVertCoupling_Origin[2] - L_SedEChannelVertPipe - ElbowRadius(ND_SedExitChannelDrain)
], [0; 0; 0]*deg, ND_SedExitChannelDrain, PS_Default, ["SedTankCon"])
SedEChannelHorizCouplingFrz := FreezeLayer("SedEChannelHorizCouplingPlu")
SedEChannelDrainStopperLayer := layer_new("SedEChannelDrainStopperPlu", blue)
SedEChannelDrainStopper := PipeF(SedEChannelDrainVertCoupling_Origin + [0 m; 0 m; CouplingLength(ND_SedExitChannelDrain) - 2*SocketDepth(ND_SedExitChannelDrain)], HW_SedExitChannel + SocketDepth(ND_SedExitChannelDrain) + 5 cm, [0; 90; 0]*deg, ND_SedExitChannelDrain, PS_Default)
SedEChannelDrainStopperFrz := FreezeLayer("SedEChannelDrainStopperPlu")
SedExitDrainScript :=
    stack(SedEChannelDrainVertCouplingLayer, SedEChannelDrainVertCoupling, SedEChannelVertCouplingFrz, SedEChannelDrainVertPipeLayer, SedEChannelDrainVertPipe, SedEChannelVertPipeFrz, SedEChannelElbowLayer, SedEChannelDrainElbow, SedEChannelElbowFrz, SedEChannelDrainStopperLayer, SedEChannelDrainStopper, SedEChannelDrainStopperFrz) if L_SedEChannelHorizPipe ≤ SocketDepth(ND_SedExitChannelDrain)
    stack(SedEChannelDrainVertCouplingLayer, SedEChannelDrainVertCoupling, SedEChannelVertCouplingFrz, SedEChannelDrainVertPipeLayer, SedEChannelDrainVertPipe, SedEChannelVertPipeFrz, SedEChannelElbowLayer, SedEChannelDrainElbow, SedEChannelElbowFrz, SedEChannelHorizPipeLayer, SedEChannelHorizPipe, SedEChannelHorizPipeFrz, SedEChannelHorizCouplingLayer, SedEChannelHorizCoupling, SedEChannelHorizCouplingFrz, SedEChannelDrainStopperLayer, SedEChannelDrainStopper, SedEChannelDrainStopperFrz) if -SedEChannelDrainVertCoupling_Origin[0] - ElbowRadius(ND_SedExitChannelDrain) + T_PlantWall ≥ CouplingLength(ND_SedExitChannelDrain)
    stack(SedEChannelDrainVertCouplingLayer, SedEChannelDrainVertCoupling, SedEChannelVertCouplingFrz, SedEChannelDrainVertPipeLayer, SedEChannelDrainVertPipe, SedEChannelDrainVertPipeLayer, SedEChannelDrainVertPipe, SedEChannelVertPipeFrz, SedEChannelElbowLayer, SedEChannelDrainElbow, SedEChannelElbowFrz, SedEChannelHorizPipeLayer, SedEChannelHorizPipe, SedEChannelHorizPipeFrz, SedEChannelDrainStopperLayer, SedEChannelDrainStopper, SedEChannelDrainStopperFrz) otherwise
# Outlets to Filter
SedOutletCoupling_Origin := [
    Plant_Origin[0] - L_Sed + W_SedInletChannel + T_SedWeir + S_Fitting + ConRadius(ND_FiEntrancePipe);
    Plant_Origin[1] - T_PlantWall + (W_SedBay*N_SedBays + T_PlantWall)*N_SedTanks - ConRadius(ND_FiEntrancePipe) - S_Fitting;
    Z_SedChannelBottom - SocketDepth(ND_FiEntrancePipe)
]
SedOutletVertPipe_Origin := SedOutletCoupling_Origin + [0; 0; 2*SocketDepth(ND_FiEntrancePipe) - CouplingLength(ND_FiEntrancePipe)]
L_SedOutletVertPipe := 2*SocketDepth(ND_FiEntrancePipe) + max(0, T_PlantWall - CouplingLength(ND_FiEntrancePipe))
SedOutletElbow1_Origin := SedOutletVertPipe_Origin - [0; 0; L_SedOutletVertPipe]
SedOutletFittingsLayer := layer_new("SedOutletFittingsPlu", green)
SedOutletCoupling1 := CouplingSUBF(SedOutletCoupling_Origin, [0; 270]*deg, ND_FiEntrancePipe, PS_Default, ["SedChannelsCon"])
SedOutletElbow1 := ElbowF(SedOutletElbow1_Origin, [0; 0; 270]*deg, ND_FiEntrancePipe, PS_Default)
SedOutletCoupling2 := CouplingSUBF([
    Plant_Origin[0] - T_PlantWall - L_Sed + CouplingLength(ND_FiEntrancePipe) - SocketDepth(ND_FiEntrancePipe);
    SedOutletElbow1_Origin[1];
    -ElbowRadius(ND_FiEntrancePipe) + SedOutletElbow1_Origin[2]
], [0; 0]*deg, ND_FiEntrancePipe, PS_Default, ["SedTankCon"])
SedOutletFittingsFrz := FreezeLayer("SedOutletFittingsPlu")
SedOutletPipesLayer := layer_new("SedOutletPipesPlu", blue)
SedOutletVertPipe := PipeSUBF(SedOutletVertPipe_Origin, L_SedOutletVertPipe, [0; 270]*deg, ND_FiEntrancePipe, PS_Default, ["SedChannelsCon"])
SedOutletHorizPipe := PipeF([-ElbowRadius(ND_FiEntrancePipe); 0; -ElbowRadius(ND_FiEntrancePipe)] + SedOutletElbow1_Origin, SedOutletElbow1_Origin[0] - ElbowRadius(ND_FiEntrancePipe) - (Plant_Origin[0] - T_PlantWall - L_Sed + CouplingLength(ND_FiEntrancePipe) - SocketDepth(ND_FiEntrancePipe)), [0; 0]*deg, ND_FiEntrancePipe, PS_Default)
FiInletChannelXPipe_Origin := [
    Plant_Origin[0] - T_PlantWall - L_Sed + SocketDepth(ND_FiEntrancePipe);
    SedOutletElbow1_Origin[1];
    -ElbowRadius(ND_FiEntrancePipe) + SedOutletElbow1_Origin[2]
]
L_FiInletChannelXPipe := -(Plant_Origin[0] - L_Sed - 2*T_PlantWall - W_PlantDC) + FiInletChannelXPipe_Origin[0] - CouplingLength(ND_FiEntrancePipe) + SocketDepth(ND_FiEntrancePipe)
FiInletChannelXPipe := PipeSUBF(FiInletChannelXPipe_Origin, L_FiInletChannelXPipe, [0; 0]*deg, ND_FiEntrancePipe, PS_Default, ["SedTankCon"])
SedOutletPipesFrz := FreezeLayer("SedOutletPipesPlu")
SedBoxToFilter := stack(SedOutletFittingsLayer, SedOutletCoupling1, SedOutletCoupling2, SedOutletElbow1, SedOutletFittingsFrz, SedOutletPipesLayer, SedOutletVertPipe, SedOutletHorizPipe, FiInletChannelXPipe, SedOutletPipesFrz)
AC_SedTank :=
    stack(SedConScript, SedDrainCoverScript, SedManifoldScript, SedLaunderScript, SedHopperDrainScript, SedSludgeScript, SedTankLaminaScript, SedDiffuserScript, SedSkimmerScript, SedHopperViewerScript, SedChannelWeirScript, BrepSedTank, SedInletDrainScript, SedExitDrainScript, SedPipeFrameLedges, SedBoxToFilter, SedBaffleScript) if N_SedBays == 1 and N_SedTanks == 1
    stack(SedConScript, SedDrainCoverScript, SedManifoldScript, SedLaunderScript, SedHopperDrainScript, SedSludgeScript, SedTankLaminaScript, SedDiffuserScript, SedSkimmerScript, SedHopperViewerScript, ThawAllSed, FreezeSedPieces, ArraySedBay, FreezeAllSed, BrepSedTank, SedChannelWeirScript, SedInletDrainScript, SedExitDrainScript, SedPipeFrameLedges, SedBoxToFilter, SedBaffleScript) if N_SedBays > 1 and N_SedTanks == 1
    stack(SedConScript, SedDrainCoverScript, SedManifoldScript, SedLaunderScript, SedHopperDrainScript, SedSludgeScript, SedTankLaminaScript, SedDiffuserScript, SedSkimmerScript, SedHopperViewerScript, ThawAllSed, FreezeSedPieces, SedPipeFrameLedges, ThawSedTank, ArraySedTank, FreezeAllSed, ThawSedTank, FreezeSedTankCon, BrepSedTank, SedChannelWeirScript, SedInletDrainScript, SedExitDrainScript, SedBoxToFilter, SedBaffleScript) if N_SedTanks > 1 and N_SedBays == 1
    stack(SedConScript, SedDrainCoverScript, SedManifoldScript, SedLaunderScript, SedHopperDrainScript, SedSludgeScript, SedTankLaminaScript, SedDiffuserScript, SedSkimmerScript, SedHopperViewerScript, ThawAllSed, FreezeSedPieces, ArraySedBay, SedPipeFrameLedges, ThawSedTank, ArraySedTank, FreezeAllSed, BrepSedTank, SedChannelWeirScript, SedInletDrainScript, SedExitDrainScript, SedPipeFrameLedges, SedBoxToFilter, SedBaffleScript) otherwise  # error: This variable is undefined.
