Q_Plant := 20*L/s
# [reference: ExpertInputs.xmcd]
# [reference: MathFunctions.xmcd]
# [reference: PipeDatabase.xmcd]
# [reference: MaterialsDatabase.xmcd]
# [reference: FluidsFunctions.xmcd]
# [reference: SedTankFunctions.xmcd]
# [reference: CdcFunctions.xmcd]
# [reference: SedimentationTank may.xmcd]
# [reference: Flocculator.xmcd]
# [reference: LFOM.xmcd]
# [reference: EntranceTank.xmcd]
# [reference: StackedRapidSandFilter.xmcd]
# [reference: LinearCdc.xmcd]
# [reference: ChemStorageTanks.xmcd]
# AutoCAD drawing programs:
# Translators:
# These are the codes that take MathCAD outputs and create AutoCAD scripts that are used to draw the plant (formerly Basics)
# [reference: MtoATranslators.xmcd]
# The wrapped MtoA translator contains the functions that the user will want to access. These functions will draw pieces with full functionality - specifying the location, dimension, and orientation of the object. Also, it contains layer control and subtraction capabilities for grouped objects.
# [reference: MtoATranslatorsWrapped.xmcd]
# Drawing functions:
# [reference: ChannelF.xmcd]
# [reference: PlumbingF.xmcd]
# [reference: TankF.xmcd]
# [reference: StairsF.xmcd]
# [reference: DrainChannelF.xmcd]
# AutoCAD Script Files:
# [reference: FlocculatorAC.xmcd]
# Sedimentation Tank Drawing
# Sedimentation Tank Concrete (excluding lamella support ledge)
# Side Slopes, Launder Support Ledge, Flow Weir Ledge
SedTankLayer := layer_new("SedTankCon", grey)
SelectSedCon := SelectLayer("SedTankCon")
# Draw as a channel so that it can be arrayed. All side walls at end.
DrawSedTank := ChannelDrawing(Plant_Origin + [-L_Sed; W_SedBay + T_PlantWall; 0 m], [W_SedBay + 2*T_SedWallDivider; L_Sed; H_Sed], T_PlantWall, [270; 0; 0]*deg)
SedSlopePolyline := Pline3D([
    [Plant_Origin[0]; Plant_Origin[1] + W_SedBay; Plant_Origin[2]] + [0 m; T_ConcreteMin; 0 m];
    [Plant_Origin[0]; Plant_Origin[1] + W_SedBay; Plant_Origin[2]] + [Plant_Origin[0]; -W_SedBay/2 + W_SedSludge/2; 0 m];
    [Plant_Origin[0]; Plant_Origin[1] + W_SedBay; Plant_Origin[2]] + [0 m; -W_SedBay/2 + W_SedSludge/2; H_SedSludge];
    [Plant_Origin[0]; Plant_Origin[1] + W_SedBay; Plant_Origin[2]] + [0 m; -W_SedBay/2 + W_SedSludge/2 + T_SedDrainCoverLedge; H_SedSludge];
    [Plant_Origin[0]; Plant_Origin[1] + W_SedBay; Plant_Origin[2]] + [0 m; -W_SedBay/2 + W_SedSludge/2 + T_SedDrainCoverLedge; H_SedSludge + H_SedDrainCoverTotal];
    [Plant_Origin[0]; Plant_Origin[1] + W_SedBay - T_ConcreteMin; Plant_Origin[2]] + [0 m; 0 m; Z_SedSideSlopes - T_ConcreteMin*tan(AN_SedSlope)];
    [Plant_Origin[0]; Plant_Origin[1] + W_SedBay - T_ConcreteMin; Z_SedLamellaBottom];
    [Plant_Origin[0]; Plant_Origin[1] + W_SedBay; Plant_Origin[2]] + [0 m; T_ConcreteMin; Z_SedLamellaBottom];
    [Plant_Origin[0]; Plant_Origin[1] + W_SedBay; Plant_Origin[2]] + [0 m; T_ConcreteMin; 0 m]
])
ExtrudeSedSlopes := ExtrudeLast(-L_Sed)
MirrorSedSlopes := Mirror3dLast("zx", [Plant_Origin[0]; Plant_Origin[1] + W_SedBay - W_SedBay/2], "n")
SedLaunderLedge := BoxF([0; W_SedBay - 1/2*W_SedBay + ConRadius(ND_SedLaunder); Z_SedLaunder - ConRadius(ND_SedLaunder)] + Plant_Origin, [
    -2*SocketDepth(ND_SedLaunder);
    W_SedBay - 1/2*W_SedBay - ConRadius(ND_SedLaunder);
    Z_SedLaunder - ConRadius(ND_SedLaunder) - T_ConcreteMin
] + Plant_Origin, [0; 0; 0]*deg)
SedFlocWeirLedge := BoxF([
    -L_Sed + L_SedHopper + (W_SedInletChannelPreWeir + T_PlantWall)*(EN_InletChannelGeom == Inlet_FullDepth);
    Plant_Origin[1] + W_SedBay;
    H_SedSludge
] + Plant_Origin, [
    -L_Sed + L_SedHopper + (W_SedInletChannelPreWeir + T_PlantWall)*(EN_InletChannelGeom == Inlet_FullDepth) - T_SedWeir;
    Plant_Origin[1];
    Z_SedManifoldPipe
] + Plant_Origin, [0; 0; 0]*deg)
SedSlopeLedgeScript := stack(SedTankLayer, DrawSedTank, SedSlopePolyline, ExtrudeSedSlopes, MirrorSedSlopes, SedLaunderLedge, SedFlocWeirLedge)
# Inlet and Exit Channels
SedInletPostWeirVert := BoxF([
    -L_Sed - T_SedWeir - W_SedInletChannelPostWeir + Plant_Origin[0];
    Plant_Origin[1] + W_SedBay + T_PlantWall;
    Plant_Origin[2] + H_Sed - H_SedInletChannelPostWeir - T_ChannelWall
], [-L_Sed - T_SedWeir - W_SedInletChannelPostWeir - T_PlantWall; Plant_Origin[1] - T_PlantWall; H_Sed] + Plant_Origin, [0; 0; 0]*deg)
SedInletChannelPostWeirHoriz := BoxF([
    -L_Sed - T_SedWeir - W_SedInletChannelPostWeir + Plant_Origin[0];
    Plant_Origin[1] + W_SedBay + T_PlantWall;
    Plant_Origin[2] + H_Sed - H_SedInletChannelPostWeir
], [
    -L_Sed - T_PlantWall + Plant_Origin[0];
    Plant_Origin[1] - T_PlantWall;
    Plant_Origin[2] + H_Sed - H_SedInletChannelPostWeir - T_ChannelWall
], [0; 0; 0]*deg)
# Mid flow situation:
SedInnerChannelsVert := BoxF([
    -L_Sed + Plant_Origin[0] + W_SedInletChannelPreWeir + T_SedWeir + W_SedExitChannel;
    Plant_Origin[1] + W_SedBay + T_PlantWall;
    Plant_Origin[2] + H_Sed - H_SedExitChannel - T_ChannelWall
], [
    -L_Sed + Plant_Origin[0] + W_SedInletChannelPreWeir + T_SedWeir + W_SedExitChannel + T_ChannelWall;
    Plant_Origin[1] - T_PlantWall;
    H_Sed + Plant_Origin[2]
], [0; 0; 0]*deg)
SedInnerChannelsHoriz := BoxF([
    -L_Sed + Plant_Origin[0];
    Plant_Origin[1] + W_SedBay + T_PlantWall;
    Plant_Origin[2] + H_Sed - H_SedExitChannel
], [
    -L_Sed + Plant_Origin[0] + W_SedInletChannelPreWeir + T_SedWeir + W_SedExitChannel + T_ChannelWall;
    Plant_Origin[1] - T_PlantWall;
    Plant_Origin[2] + H_Sed - H_SedExitChannel - T_ChannelWall
], [0; 0; 0]*deg)
SedInnerChannelsMid := stack(SedInnerChannelsVert, SedInnerChannelsHoriz)
# High Flow Situation:
SedExitChannelHoriz := BoxF([
    -L_Sed + Plant_Origin[0] + W_SedInletChannelPreWeir;
    Plant_Origin[1] + W_SedBay + T_PlantWall;
    Plant_Origin[2] + H_Sed - H_SedExitChannel
], [
    -L_Sed + Plant_Origin[0] + W_SedInletChannelPreWeir + T_SedWeir + W_SedExitChannel + T_ChannelWall;
    Plant_Origin[1] - T_PlantWall;
    Plant_Origin[2] + H_Sed - H_SedExitChannel - T_ChannelWall
], [0; 0; 0]*deg)
SedExitChannelVert := BoxF([
    -L_Sed + Plant_Origin[0] + W_SedInletChannelPreWeir + T_SedWeir + W_SedExitChannel;
    Plant_Origin[1] + W_SedBay + T_PlantWall;
    Plant_Origin[2] + H_Sed - H_SedExitChannel - T_ChannelWall
], [
    -L_Sed + Plant_Origin[0] + W_SedInletChannelPreWeir + T_SedWeir + W_SedExitChannel + T_ChannelWall;
    Plant_Origin[1] - T_PlantWall;
    H_Sed + Plant_Origin[2]
], [0; 0; 0]*deg)
SedInnerChannelsHigh := stack(SedExitChannelHoriz, SedExitChannelVert)
SedInnerChannels :=
    SedInnerChannelsMid if EN_InletChannelGeom ≠ Inlet_FullDepth
    SedInnerChannelsHigh otherwise
SedChannelSeparator := BoxF([
    -L_Sed + Plant_Origin[0] + W_SedInletChannelPreWeir + T_SedWeir;
    Plant_Origin[1] + W_SedBay + T_PlantWall;
    Plant_Origin[2] - H_SedExitChannel + H_Sed
], [
    -L_Sed + Plant_Origin[0] + W_SedInletChannelPreWeir;
    Plant_Origin[1] - T_PlantWall;
    H_Sed + Plant_Origin[2]
], [0; 0; 0]*deg)
SedWeirExit := BoxF([
    -L_Sed + Plant_Origin[0] + W_SedInletChannelPreWeir + T_SedWeir + W_SedExitChannelPostWeir;
    Plant_Origin[1] + W_SedBay + T_PlantWall;
    Plant_Origin[2] - H_SedExitChannel + H_Sed
], [
    -L_Sed + Plant_Origin[0] + W_SedInletChannelPreWeir + 2*T_SedWeir + W_SedExitChannelPostWeir;
    Plant_Origin[1] - T_PlantWall;
    H_Sed - H_SedExitChannel + H_SedWeirExit + Plant_Origin[2]
], [0; 0; 0]*deg)
SedChannelScript :=
    stack(SedInletPostWeirVert, SedInletChannelPostWeirHoriz, SedInnerChannelsHigh, SedChannelSeparator) if N_FiEntrancePipes == 1
    stack(SedInletPostWeirVert, SedInletChannelPostWeirHoriz, SedInnerChannelsHigh, SedChannelSeparator, SedWeirExit) otherwise
# Floc Hopper Front and Back Slopes
SedHopperPeak := [
    [Plant_Origin[0] - L_Sed; Plant_Origin[1]; Plant_Origin[2]];
    [Plant_Origin[0] - L_Sed + L_SedHopper; Plant_Origin[1]; Plant_Origin[2]];
    [Plant_Origin[0] - L_Sed + L_SedHopper; Plant_Origin[1]; Z_SedManifoldPipe];
    [Plant_Origin[0] - L_Sed + L_SedHopper - T_ConcreteMin; Plant_Origin[1]; Z_SedManifoldPipe];
    [X_SedHopperBottom; Plant_Origin[1]; Z_SedHopperIntersect];
    [Plant_Origin[0] - L_Sed; Plant_Origin[1]; Z_SedHopperBackSlope];
    [Plant_Origin[0] - L_Sed; Plant_Origin[1]; Plant_Origin[2]]
]
SedHopperFlat := [
    [Plant_Origin[0] - L_Sed; Plant_Origin[1]; Plant_Origin[2]];
    [Plant_Origin[0] - L_Sed + L_SedHopper; Plant_Origin[1]; Plant_Origin[2]];
    [Plant_Origin[0] - L_Sed + L_SedHopper; Plant_Origin[1]; Z_SedManifoldPipe];
    [Plant_Origin[0] - L_Sed + L_SedHopper - T_ConcreteMin; Plant_Origin[1]; Z_SedManifoldPipe];
    [Plant_Origin[0] - L_Sed + L_SedHopper - T_ConcreteMin; Plant_Origin[1]; Z_SedHopperFrontSlope];
    [Plant_Origin[0] - L_Sed + L_SedHopperBackSlope; Plant_Origin[1]; Z_SedHopperIntersect];
    [Plant_Origin[0] - L_Sed; Plant_Origin[1]; Z_SedHopperBackSlope];
    [Plant_Origin[0] - L_Sed; Plant_Origin[1]; Plant_Origin[2]]
] = [
    [-4.08214; 0; 0]; [-3.12688; 0; 0]; [-3.12688; 0; 0.423143]; [-3.17688; 0; 0.423143]; [-3.17688; 0; 0.423143]; [-3.2785; 0; 0.221498]; [-4.08214; 0; 0.925117]; [-4.08214; 0; 0]
] m
SedHopperPlineMatrix :=
    SedHopperFlat if L_SedHopperFrontSlopeMax + L_SedHopperBackSlope < L_SedHopper - T_ConcreteMin
    SedHopperPeak otherwise
SedHopperPline := Pline3D(SedHopperPlineMatrix)
ExtrudeSedHopper := ExtrudeLast(W_SedBay)
SedHopperScript := stack(SedHopperPline, ExtrudeSedHopper)
# Manifold Ledge
SedManifoldLedge := BoxF([
    Plant_Origin[0];
    Plant_Origin[1] + W_SedBay/2 - ConRadius(ND_SedManifold);
    Z_SedManifoldPipe - ConRadius(ND_SedManifold)
], [
    Plant_Origin[0] - SocketDepth(ND_SedManifold) - CapThickness(ND_SedManifold);
    Plant_Origin[1] + W_SedBay/2 + ConRadius(ND_SedManifold);
    Z_SedManifoldPipe - ConRadius(ND_SedManifold) - T_ConcreteMin
], [0; 0; 0]*deg)
FreezeSedTank := FreezeLayer("SedTankCon")
# Sed Inlet Weir
SedInletWeirSubtractBoxVert := BoxF([
    -L_Sed + Plant_Origin[0] - T_SedWeir;
    Plant_Origin[1] + W_SedBay + T_PlantWall;
    Plant_Origin[2] - H_SedInletChannelPostWeir + H_Sed
], [
    -L_Sed + Plant_Origin[0] - T_PlantWall - zc;
    Plant_Origin[1] - T_PlantWall;
    H_Sed - H_SedInletChannelPostWeir + H_SedWeirInlet + zc + Plant_Origin[2]
], [0; 0; 0]*deg)
SedInletWeirSubtractBoxHoriz := BoxF([
    -L_Sed + Plant_Origin[0] + zc;
    Plant_Origin[1] + W_SedBay + T_PlantWall;
    H_Sed - H_SedInletChannelPostWeir + H_SedWeirInlet + Plant_Origin[2]
], [
    -L_Sed + Plant_Origin[0] - T_PlantWall - zc;
    Plant_Origin[1] - T_PlantWall;
    H_Sed + Plant_Origin[2]
], [0; 0; 0]*deg)
SedWeirInletSubtract := SubtractF(["SedTankCon"], "DeleteMe")
SedConScript := stack(SedSlopeLedgeScript, SedChannelScript, SedHopperScript, SedManifoldLedge, FreezeSedTank, SedInletWeirSubtractBoxVert, SedInletWeirSubtractBoxHoriz, GroupDelete, SedWeirInletSubtract)
SedDrainCoverLayer := layer_new("SedDrainCoverCon", ltgrey)
SedDrainCoverPline := Pline3D([
    [
        Plant_Origin[0];
        Plant_Origin[1] + W_SedBay - (W_SedBay + W_SedDrainCover)/2;
        Plant_Origin[2] + H_SedSludge
    ];
    [
        Plant_Origin[0];
        Plant_Origin[1] + W_SedBay - (W_SedBay + W_SedDrainCover)/2;
        Plant_Origin[2] + H_SedSludge + H_SedDrainCoverTotal
    ];
    [
        Plant_Origin[0];
        Plant_Origin[1] + W_SedBay - W_SedBay/2 - outerradius(ND_SedJetReverser);
        T_ConcreteMin + outerradius(ND_SedJetReverser) + H_SedSludge
    ];
    [
        Plant_Origin[0];
        Plant_Origin[1] + W_SedBay - W_SedBay/2 + outerradius(ND_SedJetReverser);
        T_ConcreteMin + outerradius(ND_SedJetReverser) + H_SedSludge
    ];
    [
        Plant_Origin[0];
        Plant_Origin[1] + W_SedBay - (W_SedBay - W_SedDrainCover)/2;
        Plant_Origin[2] + H_SedSludge + H_SedDrainCoverTotal
    ];
    [
        Plant_Origin[0];
        Plant_Origin[1] + W_SedBay - (W_SedBay - W_SedDrainCover)/2;
        Plant_Origin[2] + H_SedSludge
    ];
    [
        Plant_Origin[0];
        Plant_Origin[1] + W_SedBay - (W_SedBay + W_SedDrainCover)/2;
        Plant_Origin[2] + H_SedSludge
    ]
])
ExtrudeSedDrainCover := ExtrudeLast(-L_SedUpflow)
SedDrainCoverBox := BoxF(Plant_Origin + [0; W_SedBay - (W_SedBay + W_SedDrainCover)/2; H_SedSludge], Plant_Origin + [0; W_SedBay - (W_SedBay + W_SedDrainCover)/2; H_SedSludge] + [-L_SedUpflow; W_SedDrainCover; H_SedDrainCoverTotal], [0; 0; 0]*deg)
FreezeSedDrainCover := FreezeLayer("SedDrainCoverCon")
SedJetRedirect := CylinderF([0 m; W_SedBay - W_SedBay/2; H_SedSludge + T_ConcreteMin + outerradius(ND_SedJetReverser)] + Plant_Origin, outerradius(ND_SedJetReverser), L_SedUpflow + zc, [0; 0]*deg)
N_SedDrainCoverSegmentOrifices
SedDrainCoverOrifices := CylinderF([-B_SedSludgeOrifices/2; W_SedBay - W_SedBay/2; H_SedSludge + H_SedDrainCoverTotal + zc] + Plant_Origin, D_SedSludgeOrifice/2, H_SedDrainCoverTotal + 2*zc, [0; 270]*deg)
ArraySedDrainOrifices := ArrayLast(1, N_SedSludgeOrifices, -B_SedSludgeOrifices)
GroupSedDrainCuts := GroupAll("DeleteMe")
SubtractSedDrainCuts := SubtractF(["SedDrainCoverCon"], "DeleteMe")
ThawSedDrainCover := SelectLayer("SedDrainCoverCon")
SedDrainCoverScript :=
    stack(SedDrainCoverLayer, SedDrainCoverBox, FreezeSedDrainCover, SedJetRedirect, SedDrainCoverOrifices, ArraySedDrainOrifices, GroupSedDrainCuts, SubtractSedDrainCuts, ThawSedDrainCover, FreezeSedDrainCover) if W_SedDrainCover == outerdiameter(ND_SedJetReverser)
    stack(SedDrainCoverLayer, SedDrainCoverPline, ExtrudeSedDrainCover, FreezeSedDrainCover, SedJetRedirect, SedDrainCoverOrifices, ArraySedDrainOrifices, GroupSedDrainCuts, SubtractSedDrainCuts, ThawSedDrainCover, FreezeSedDrainCover) otherwise
# Sludge Drain Cover
# Inlet Manifold
# Origins and Dimensions
S_FromSedWall := 1 in
SedManPipe_Origin := [
    Plant_Origin[0] - CapThickness(ND_SedManifold);
    Plant_Origin[1] + (-W_SedDiffuserOutlet/2) + outerradius(ND_SedJetReverser) + W_SedBay/2 - T_SedDiffuserWall - S_FromSedWall;
    Z_SedManifoldPipe + S_FromSedWall
]
SedManElbow_Origin := SedManPipe_Origin - [L_SedManifoldPipe; 0; 0]
# Manifold Pipes
SedPipeLayer := layer_new("SedPipePlu", blue)
SelectSedPipes := SelectLayer("SedPipePlu")
CapHeight(2 in) = 0.0515938 m
SedPipeFrz := FreezeLayer("SedPipePlu")
SedRemovableLayer := layer_new("SedRemovablePlu", red)
SelectSedRemovables := SelectLayer("SedRemovablePlu")
SedRemovableFrz := FreezeLayer("SedRemovablePlu")
AN_SedSlope = 50 deg
SedManPipe := PipeSUBF(SedManPipe_Origin, L_SedManifoldPipe, [0; 0]*deg, ND_SedManifold, PS_Default, ["SedTankCon"])
SedManPipeScript := stack(SedPipeLayer, SedManPipe, SedPipeFrz)
# Manifold Feet
ND_ManFeet := 1 in
H_additional := (W_SedDiffuserOutlet/2 - 2*T_SedDiffuserWall + S_FromSedWall)/tan(90 deg - AN_SedSlope)  # need to figure out why 2 here works
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L_LongTriangleLeg := L_SedManifoldDiffuser + innerdiameter(ND_SedManifold, PS_Default)/2 + H_additional + S_FromSedWall
L_ShortTriangleLeg := tan(90 deg - AN_SedSlope)*L_LongTriangleLeg
S_FromManifold := L_ShortTriangleLeg*cos(90 deg - AN_SedSlope)
# Origin Point Calculation of Feet
L_ShortFoot := S_FromManifold - outerradius(ND_SedManifold)
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H_additional2 := (-4*T_SedDiffuserWall - S_FromSedWall + 2*outerradius(ND_SedJetReverser) - W_SedDiffuserOutlet/2)/tan(90 deg - AN_SedSlope)
# need to figure out why 4 here works
# Theoretical Calculation of Feet Length
L_LongTriangleLeg2 := innerdiameter(ND_SedManifold, PS_Default)/2 + L_SedManifoldDiffuser + H_additional2 + S_FromSedWall
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S_FromManifold2 := cos(AN_SedSlope)*L_LongTriangleLeg2
L_LongFoot := S_FromManifold2 - outerradius(ND_SedManifold)
# Real Calculation of Feet Length
Y_1 := S_FromManifold*cos(90 deg - AN_SedSlope)
Y_2 := S_FromManifold2*sin(AN_SedSlope)
Z_1 := S_FromManifold*sin(90 deg - AN_SedSlope)
Z_2 := S_FromManifold2*cos(AN_SedSlope)
ManFeetLayer := layer_new("ManFeet", red)
# Does not need to be ND. ManFeet, could be a shorter distance, report did not specify
ManFeetLong_OriginPoint := [
    SedManPipe_Origin[0] + CapDiameter(ND_SedManifold)/2 - outerradius(ND_SedManifold) - CapHeight(ND_SedManifold) - ND_ManFeet;
    SedManPipe_Origin[1] - Y_2;
    SedManPipe_Origin[2] - Z_2
]
ManFeetShort_OriginPoint := [ManFeetLong_OriginPoint[0]; SedManPipe_Origin[1] + Y_1; SedManPipe_Origin[2] - Z_1]
ManFeetLong := PipeF(ManFeetLong_OriginPoint, L_LongFoot, [-AN_SedSlope; 90 deg], ND_ManFeet, PS_Default)
outerradius(ND_SedManifold) + CapHeight(ND_SedManifold) + ND_ManFeet = 0.296862 m
ManFeetShort := PipeF(ManFeetShort_OriginPoint, L_ShortFoot, [180 deg - AN_SedSlope; -90 deg], ND_ManFeet, PS_Default)
Loc_Feet := -L_SedManifoldPipe + outerradius(ND_SedManifold) + CapHeight(ND_SedManifold) + ND_ManFeet
ManFeetLayerFrz := FreezeLayer("ManFeet")
S_SedPipe := .25 in  # Subject to change, not specified in report
Y_3 := (outerradius(ND_SedManifold) + S_SedPipe)*sin(AN_SedSlope)
Y_4 := (outerradius(ND_SedManifold) + S_SedPipe)*cos(90 deg - AN_SedSlope)
Z_3 := (outerradius(ND_SedManifold) + S_SedPipe)*cos(AN_SedSlope)
Z_4 := (outerradius(ND_SedManifold) + S_SedPipe)*sin(90 deg - AN_SedSlope)
R_Hole := .25 in
HoleLongFoot_OriginPoint := [ManFeetLong_OriginPoint[0]; SedManPipe_Origin[1] - Y_3 + 2 in; SedManPipe_Origin[2] - Z_3 - 2 in]
HoleShortFoot_OriginPoint := [ManFeetLong_OriginPoint[0]; SedManPipe_Origin[1] + Y_4 - 2 in; SedManPipe_Origin[2] - Z_4 - 2 in]
DrawHole1 := CylinderF(HoleLongFoot_OriginPoint, R_Hole, 4 in, [180 deg - AN_SedSlope; -90 deg])
DrawHole2 := CylinderF(HoleShortFoot_OriginPoint, R_Hole, 4 in, [-AN_SedSlope; 90 deg])
SubtractHole := SubtractF(["ManFeet"], "DeleteMe")
# Hose Clamps:
LayerHoseClamp := layer_new("HoseClamp", purple)
T_Clamp := 1/8*in
L_Clamp := .25 in
R_Clamp := outerradius(ND_SedManifold) + R_Hole + S_SedPipe
HoseClamp_Origin := [ManFeetLong_OriginPoint[0]; SedManPipe_Origin[1]; SedManPipe_Origin[2]]
HoseClampOuter := CylinderF(HoseClamp_Origin, R_Clamp + T_Clamp, L_Clamp, [0; 0]*deg)
FrzLayerHoseClamp := FreezeLayer("HoseClamp")
HoseClampInner := CylinderF(HoseClamp_Origin, R_Clamp, L_Clamp, [0; 0]*deg)
SubtractInner := SubtractF(["HoseClamp"], "DeleteMe")
DrawHoseClamps := stack(LayerHoseClamp, HoseClampOuter, FrzLayerHoseClamp, HoseClampInner, GroupDelete, SubtractInner, DrawHole1, DrawHole2, GroupDelete, SubtractHole)
SelectHoseClamps := SelectLayer("HoseClamp")
SelectFeet := SelectLayer("ManFeet")
ArrayFeet := array_all(1, 2, Loc_Feet)
ManFeetScript := stack(ManFeetLayer, ManFeetLong, ManFeetShort, ManFeetLayerFrz, DrawHoseClamps, SelectHoseClamps, SelectFeet, ArrayFeet, FrzLayerHoseClamp, ManFeetLayerFrz)
# Manifold Fittings
SedFittingLayer := layer_new("SedFittingPlu", green)
SelectSedFittings := SelectLayer("SedFittingPlu")
SedFittingFrz := FreezeLayer("SedFittingPlu")
SedManElbow := ElbowSUBF(SedManElbow_Origin, [90; 0; 270]*deg, ND_SedManifold, PS_Default, ["SedTankCon"])
SedManCap := CapF(SedManPipe_Origin, [0; 0; 0]*deg, ND_SedManifold)
SedManFittingScript := stack(SedFittingLayer, SedManElbow, SedManCap, SedFittingFrz)
# Manifold Orifices
SedManOrifice := CylinderF([
    Plant_Origin[0] - L_Sed + L_SedHopper + L_SedDiffuserOutlet/2 + T_SedDiffuserWall + (W_SedInletChannelPreWeir + T_ChannelWall)*(EN_InletChannelGeom == Inlet_FullDepth);
    SedManPipe_Origin[1];
    SedManPipe_Origin[2]
], D_SedManifoldPort/2, ND_SedManifold, [0; 270]*deg)
ArraySedManOrifice := array_all(1, N_SedManifoldPorts, B_SedManifoldPort)
SubtractFromSedPipes := SubtractF(["SedPipePlu"], "DeleteMe")
SubtractFromSedFittings := SubtractF(["SedFittingPlu"], "DeleteMe")
SedManOrificeScript := stack(SedManOrifice, ArraySedManOrifice, GroupDelete, SubtractFromSedPipes, SedManOrifice, ArraySedManOrifice, GroupDelete, SubtractFromSedFittings)
SedManifoldScript := stack(SedManPipeScript, SedManFittingScript, SedManOrificeScript, ManFeetScript)
# Exit Launder
# Origins and Dimensions
SedLaunderPipe_Origin := [
    Plant_Origin[0] - CapThickness(ND_SedLaunder) - SocketDepth(ND_SedLaunder);
    Plant_Origin[1] + W_SedBay/2;
    Z_SedLaunder
]
SedLaunderCoupling_Origin := [
    Plant_Origin[0] - L_Sed + W_SedExitChannel + W_SedInletChannelPreWeir + T_SedWeir + CouplingLength(ND_SedLaunder) - SocketDepth(ND_SedLaunder);
    Plant_Origin[1] + W_SedBay/2;
    Z_SedLaunder
]
SedLaunderPlugCap_Origin := [
    Plant_Origin[0] - L_Sed + W_SedExitChannel + W_SedInletChannelPreWeir + T_SedWeir - CapHeight(ND_SedLaunder) + CapThickness(ND_SedLaunder);
    Plant_Origin[1] + W_SedBay/2;
    Z_SedLaunder
]
# Launder Fittings
SedLaunderEndCap := CapF(SedLaunderPipe_Origin, [0; 0]*deg, ND_SedLaunder)
SedLaunderPlugCap := CapF(SedLaunderPlugCap_Origin, [180; 0]*deg, ND_SedLaunder)
SedLaunderCoupling := CouplingSUBF(SedLaunderCoupling_Origin, [0; 0]*deg, ND_SedLaunder, PS_Default, ["SedTankCon"])
SedLaunderFittingScript := stack(SelectSedFittings, SedLaunderEndCap, SedLaunderCoupling, SedFittingFrz, SelectSedRemovables, SedLaunderPlugCap, SedRemovableFrz)
# Launder Pipes
SedLaunderPipe := PipeF(SedLaunderPipe_Origin, L_SedLaunder, [0; 0]*deg, ND_SedLaunder, PS_Default)
L_SedLaunderControlCapPipe := CapHeight(ND_SedLaunder) - CapThickness(ND_SedLaunder) + L_SedLaunderCapExcess
SedLaunderPlugNipple := PipeF(SedLaunderPlugCap_Origin + [L_SedLaunderControlCapPipe; 0; 0], L_SedLaunderControlCapPipe, [0; 0]*deg, ND_SedLaunder, PS_Default)
SedLaunderPipeScript := stack(SelectSedPipes, SedLaunderPipe, SedPipeFrz, SelectSedRemovables, SedLaunderPlugNipple, SedRemovableFrz)
# Launder Orifices
SedLaunderOrifice := CylinderF([-(1/2*B_SedLaunderOrifices); 0 m; 0 m] + SedLaunderPipe_Origin, D_SedLaunderOrifice/2, ND_SedLaunder, [0; 90]*deg)
ArraySedLaunderOrifices := array_all(1, N_SedLaunderOrifices, -B_SedLaunderOrifices)
SedLaunderOrificeScript := stack(SedLaunderOrifice, ArraySedLaunderOrifices, GroupDelete, SubtractFromSedPipes, SedLaunderOrifice, ArraySedLaunderOrifices, GroupDelete, SubtractFromSedFittings)
SedLaunderScript := stack(SedLaunderFittingScript, SedLaunderPipeScript, SedLaunderOrificeScript)
# Origins
SedHopperDrainAdapter1_Origin := Plant_Origin + [
    -L_Sed - T_PlantWall - SocketDepth(ND_SedHopperDrain);
    W_SedBay/2;
    Z_SedHopperIntersect + outerradius(ND_SedHopperDrain)
]
SedHopperDrainValve_Origin := SedHopperDrainAdapter1_Origin + [
    -MaleAdapterLength(ND_SedHopperDrain) + ValveSocket(ND_SedHopperDrain) + SocketDepth(ND_SedHopperDrain);
    0 m;
    0 m
]
SedHopperDrainAdapter2_Origin := SedHopperDrainValve_Origin + [
    ValveSocket(ND_SedHopperDrain) - ValveLength(ND_SedHopperDrain) + SocketDepth(ND_SedHopperDrain) - MaleAdapterLength(ND_SedHopperDrain);
    0 m;
    0 m
]
SedHopperDrainElbow_Origin := SedHopperDrainAdapter2_Origin + [-2*SocketDepth(ND_SedHopperDrain); 0 m; 0 m]
SedHopperDrainCoupling_Origin := SedHopperDrainAdapter1_Origin + [CouplingLength(ND_SedHopperDrain); 0 m; 0 m]
SedHopperDrainPipe_Origin := [
    X_SedHopperBottom;
    SedHopperDrainCoupling_Origin[1];
    Z_SedHopperIntersect + outerradius(ND_SedHopperDrain)
]
# Hopper Drain Pipes
SedHopperDrainNipple1 := PipeF(SedHopperDrainAdapter1_Origin + [2*SocketDepth(ND_SedHopperDrain); 0; 0], 2*SocketDepth(ND_SedHopperDrain), [0; 0]*deg, ND_SedHopperDrain, PS_Default)
SedHopperDrainNipple2 := PipeF(SedHopperDrainAdapter2_Origin, 2*SocketDepth(ND_SedHopperDrain), [0; 0]*deg, ND_SedHopperDrain, PS_Default)
L_SedHopperDrainPipe := X_SedHopperBottom - (Plant_Origin[0] - L_Sed - T_PlantWall + CouplingLength(ND_SedHopperDrain) - SocketDepth(ND_SedHopperDrain))
SedHopperDrainPipe := PipeSUBF(SedHopperDrainPipe_Origin, L_SedHopperDrainPipe, [0; 0]*deg, ND_SedHopperDrain, PS_Default, ["SedTankCon"])
SedHopperDrainPipeWedge := WedgeF([0; outerradius(ND_SedHopperDrain); outerradius(ND_SedHopperDrain)] + SedHopperDrainPipe_Origin, [
    -2*outerradius(ND_SedHopperDrain)/tan(AN_SedHopperSlope);
    -outerradius(ND_SedHopperDrain);
    -outerradius(ND_SedHopperDrain)
] + SedHopperDrainPipe_Origin, [0; 0; 0])
SubtractSedHopperDrainPipeWedge := SubtractF(["SedPipePlu"], "DeleteMe")
SedHopperDrainPipeScript := stack(SelectSedPipes, SedHopperDrainNipple1, SedHopperDrainNipple2, SedHopperDrainPipe, SedPipeFrz, SedHopperDrainPipeWedge, GroupDelete, SubtractSedHopperDrainPipeWedge)
# Hopper Drain Fittings
SedValveLayer := layer_new("SedValvePlu", blue3)
SelectSedValves := SelectLayer("SedValvePlu")
SedValveFrz := FreezeLayer("SedValvePlu")
SedAdapterLayer := layer_new("SedAdapterPlu", blue2)
SelectSedAdapters := SelectLayer("SedAdapterPlu")
SedAdapterFrz := FreezeLayer("SedAdapterPlu")
SedHopperDrainCoupling := CouplingSUBF(SedHopperDrainCoupling_Origin, [0; 0]*deg, ND_SedHopperDrain, PS_Default, ["SedTankCon"])
SedHopperDrainElbow := ElbowF(SedHopperDrainElbow_Origin, [90; 0; 45]*deg, ND_SedHopperDrain, PS_Default)
SedHopperDrainAdapter1 := MaleAdapterF(SedHopperDrainAdapter1_Origin, [0; 0]*deg, ND_SedHopperDrain, PS_Default)
SedHopperDrainAdapter2 := MaleAdapterF(SedHopperDrainAdapter2_Origin, [180; 0]*deg, ND_SedHopperDrain, PS_Default)
SedHopperDrainValve := insertdwg("https://confluence.cornell.edu/download/attachments/173604905/Sed-Scaled-Gate-Valve-Threaded.dwg", SedHopperDrainValve_Origin, 2*outerradius(ND_SedHopperDrain)/(1.16 m), 2*outerradius(ND_SedHopperDrain)/(1.16 m), 0 deg)
SedHopperDrainFittingScript := stack(SelectSedFittings, SedHopperDrainCoupling, SedFittingFrz, SedValveLayer, SedHopperDrainValve, SedValveFrz, SedAdapterLayer, SedHopperDrainAdapter1, SedHopperDrainAdapter2, SedAdapterFrz, SelectSedFittings, SedHopperDrainElbow, SedFittingFrz)
SedHopperDrainScript := stack(SedHopperDrainPipeScript, SedHopperDrainFittingScript)
# Floc Hopper Drain
# Sludge Drain Plumbing
# Origins and Dimensions
SedSludgeDrainCoupling_Origin := [
    CouplingLength(ND_SedSludgePipe) - SocketDepth(ND_SedSludgePipe) - T_PlantWall - L_Sed;
    W_SedBay/2;
    H_SedSludge - outerradius(ND_SedSludgePipe)
] + Plant_Origin
SedSludgeDrainPipe_Origin := Plant_Origin + [-L_Sed + L_SedHopper + T_ConcreteMin; W_SedBay/2; H_SedSludge - outerradius(ND_SedSludgePipe)]
# the ten centimeters to ensure you can wrap your hand between two valves
L_SedSludgeValvePipe := -(SedHopperDrainElbow_Origin[0] - ElbowRadius(ND_SedHopperDrain) - ConRadius(ND_SedHopperDrain)) + (Plant_Origin[0] - L_Sed - T_PlantWall) + 10 cm
L_SedSludgeEmbeddedPipe := L_SedHopper + T_SedWeir + T_PlantWall - CouplingLength(ND_SedSludgePipe) + SocketDepth(ND_SedSludgePipe)
SedSludgeDrainAdapter1_Origin := Plant_Origin + [
    -L_Sed - T_PlantWall + SocketDepth(ND_SedSludgePipe) - L_SedSludgeValvePipe;
    W_SedBay/2;
    H_SedSludge - outerradius(ND_SedSludgePipe)
]
SedSludgeDrainValve_Origin := SedSludgeDrainAdapter1_Origin + [
    -MaleAdapterLength(ND_SedSludgePipe) + SocketDepth(ND_SedSludgePipe) + ValveSocket(ND_SedSludgePipe);
    0 m;
    0 m
]
# Sludge Drain Pipes
SedSludgeValvePipe := PipeF(SedSludgeDrainAdapter1_Origin + [L_SedSludgeValvePipe; 0; 0], L_SedSludgeValvePipe, [0; 0]*deg, ND_SedSludgePipe, PS_Default)
SedSludgePipe := PipeSUBF(SedSludgeDrainPipe_Origin, L_SedSludgeEmbeddedPipe, [0; 0]*deg, ND_SedSludgePipe, PS_Default, ["SedTankCon"])
SedSludgeDrainPipeScript := stack(SelectSedPipes, SedSludgePipe, SedSludgeValvePipe, SedPipeFrz)
# Sludge Drain Fittings
SedSludgeDrainAdapter1 := MaleAdapterF(SedSludgeDrainAdapter1_Origin, [0; 0]*deg, ND_SedSludgePipe, PS_Default)
SedSludgeDrainValve := insertdwg("https://confluence.cornell.edu/download/attachments/173604905/Sed-Scaled-Gate-Valve-Threaded.dwg", SedSludgeDrainValve_Origin, 2*outerradius(ND_SedSludgePipe)/(1.16 m), 2*outerradius(ND_SedSludgePipe)/(1.16 m), 0 deg)
SedSludgeCoupling := CouplingSUBF(SedSludgeDrainCoupling_Origin, [0; 0]*deg, ND_SedSludgePipe, PS_Default, ["SedTankCon"])
SedSludgeDrainFittingScript := stack(SelectSedAdapters, SedSludgeDrainAdapter1, SedAdapterFrz, SelectSedValves, SedSludgeDrainValve, SedValveFrz, SelectSedFittings, SedSludgeCoupling, SedFittingFrz)
SedSludgeDrainScript := stack(SedSludgeDrainPipeScript, SedSludgeDrainFittingScript)
# Lamella
# Origins and Dimensions
Lamina_Origin := [
    Plant_Origin[0] - cos(AN_SedPlate)*L_SedPlate;
    Plant_Origin[1];
    Z_SedLamellaBottom + Plant_Origin[2]
]
SedModCap_Origin := Lamina_Origin + [
    ConRadius(ND_SedModulePipe)*cos(AN_SedPlate) - CapThickness(ND_SedModulePipe)*sin(AN_SedPlate) + CapHeight(ND_SedModulePipe)/sin(AN_SedPlate);
    S_Fitting + ConRadius(ND_SedModulePipe);
    ConRadius(ND_SedModulePipe)*sin(AN_SedPlate) + CapThickness(ND_SedModulePipe)*cos(AN_SedPlate)
]
SedModMirrorLineX := SedModCap_Origin[0] - (CapHeight(ND_SedModulePipe) - CapThickness(ND_SedModulePipe))*sin(AN_SedPlate) + (L_SedPlate - B_SedPlate*(N_SedModulePlates - 1)/tan(AN_SedPlate) - 2*(SedModCap_Origin[2] + (CapHeight(ND_SedModulePipe) - CapThickness(ND_SedModulePipe))*cos(AN_SedPlate) - Lamina_Origin[2])/sin(AN_SedPlate))*cos(AN_SedPlate)/2
SedModMirrorLineZ := SedModCap_Origin[2] + (CapHeight(ND_SedModulePipe) - CapThickness(ND_SedModulePipe))*cos(AN_SedPlate) + (L_SedPlate - B_SedPlate*(N_SedModulePlates - 1)/tan(AN_SedPlate) - 2*(SedModCap_Origin[2] + (CapHeight(ND_SedModulePipe) - CapThickness(ND_SedModulePipe))*cos(AN_SedPlate) - Lamina_Origin[2])/sin(AN_SedPlate))*sin(AN_SedPlate)/2
# Lamella
SedLaminaLayer := layer_new("SedModLamella", purple)
MakeSedLamina := BoxF(Lamina_Origin, Lamina_Origin + [-T_SedPlate; W_SedBay; L_SedPlate], [0; 90 deg - AN_SedPlate; 0])
ArraySedLamina := ArrayLast(1, N_SedModulePlates, -B_SedPlate/sin(AN_SedPlate))
SedLaminaFrz := FreezeLayer("SedModLamella")
SedLaminaScript := stack(SedLaminaLayer, MakeSedLamina, ArraySedLamina, SedLaminaFrz)
# Module Connector Caps
SedModCapLayer := layer_new("SedModCapPlu", red)
SedModCapRight := CapF(SedModCap_Origin, [0; 0; 0], ND_SedModulePipe)
SedModCapLeft := CapF(SedModCap_Origin - [
    B_SedPlate*(N_SedModulePlates - 1) + T_SedPlate + 2*(CapHeight(ND_SedModulePipe) - ConRadius(ND_SedModulePipe) + outerradius(ND_SedModulePipe));
    0 m;
    0 m
], [0; 180 deg; 0], ND_SedModulePipe)
SedModCapFrz := FreezeLayer("SedModCapPlu")
SedModCapScript := stack(SedModCapLayer, SedModCapRight, SedModCapLeft, SedModCapFrz)
# Module Connector Pipes and Spacers
SedModPipeLayer := layer_new("SedModPipePlu", blue3)
SedModPipe := PipeF(SedModCap_Origin, B_SedPlate*(N_SedModulePlates - 1) + T_SedPlate + 2*(CapHeight(ND_SedModulePipe) - ConRadius(ND_SedModulePipe) + outerradius(ND_SedModulePipe)), [0; 0; 0], ND_SedModulePipe, PS_Modules)
SedModPipeFrz := FreezeLayer("SedModPipePlu")
SedModSpacerLayer := layer_new("SedModSpacerPlu", blue)
SedModSpacers := PipeF(SedModCap_Origin - [CapHeight(ND_SedModulePipe) + T_SedPlate - CapThickness(ND_SedModulePipe); 0; 0], B_SedPlate - T_SedPlate, [0; 0; 0], ND_SedModulePipeSpacer, PS_Modules)
ArraySedModSpacers := ArrayLast(1, N_SedModulePlates - 1, -B_SedPlate)
SedModSpacerFrz := FreezeLayer("SedModSpacerPlu")
SedModPipeScript := stack(SedModPipeLayer, SedModPipe, SedModPipeFrz, SedModSpacerLayer, SedModSpacers, ArraySedModSpacers, SedModSpacerFrz)
# Rotate and Array Connectors and Array Modules
ThawSedModPiping := ThawMultiple(["SedMod*Plu"])
RotateSedModPiping := Rotate_All([SedModCap_Origin[0]; SedModCap_Origin[2]; SedModCap_Origin[1]], AN_SedPlate - 90 deg)
MirrorSedModPipingUp := MirrorAll([SedModMirrorLineX; SedModMirrorLineZ], [SedModMirrorLineX; SedModMirrorLineZ] + [zc; -zc/tan(AN_SedPlate)], "n")
TripleSedModPiping := array_all(3, 1, (W_SedPlate - 2*(S_Fitting + ConRadius(ND_SedModulePipe)))/2)
ThawSedModLamella := ThawMultiple(["SedModLamella"])
ArraySedMod := array_all(1, N_SedModules, -B_SedPlate*N_SedModulePlates/sin(AN_SedPlate))
FreezeSedModComponents := FreezeMultiple(["SedMod*"])
SedModArrayScript := stack(ThawSedModPiping, view("f"), RotateSedModPiping, MirrorSedModPipingUp, view("t"), TripleSedModPiping, ThawSedModLamella, ArraySedMod, FreezeSedModComponents)
SedLamellaScript := stack(SedLaminaScript, SedModCapScript, SedModPipeScript, SedModArrayScript)
# Floc Skimmer
# Origins and Dimensions
# The floc skimmer is a 2 inch nominal diameter pipe that starts at a coupling in the wall of the sedimentation tank under the exit channel, wraps around the exit channel and ends a few centimeters below the surface of the water in the sed tank.Its purpose is to capture any flocs that pass up through the plate settlers when the cap on the top of the pipe is removed.
H_SkimmerToSurface := (HW_Sed - Z_SedLaunder - outerradius(ND_SedLaunder))/2 = 3.0425 cm
SedSkimmerCoupling_Origin := [
    Plant_Origin[0] - L_Sed - T_PlantWall + SocketDepth(ND_SedSkimmer);
    Plant_Origin[1] + W_SedBay/2 - ConRadius(ND_SedLaunder) - S_Fitting - ConRadius(ND_SedSkimmer);
    Z_SedExitChannelBottom - T_ChannelWall - S_Fitting - ConRadius(ND_SedSkimmer)
]
SedSkimmerCap_Origin := [
    Plant_Origin[0] - L_Sed + W_SedExitChannel + W_SedInletChannelPreWeir + T_SedWeir + T_ChannelWall + CapDiameter(ND_SedSkimmer)/2;
    SedSkimmerCoupling_Origin[1];
    Plant_Origin[2] + HW_Sed - H_SkimmerToSurface
]
SedSkimmerHorizPipe_Origin := [
    SedSkimmerCap_Origin[0] - ElbowRadius(ND_SedSkimmer);
    SedSkimmerCoupling_Origin[1];
    SedSkimmerCoupling_Origin[2]
]
SedSkimmerElbow_Origin := SedSkimmerHorizPipe_Origin + [ElbowRadius(ND_SedSkimmer); 0; ElbowRadius(ND_SedSkimmer)]
SedSkimmerVertPipe_Origin := SedSkimmerCap_Origin
# Skimmer Fittings
SedSkimmerCap := CapF(SedSkimmerCap_Origin, [0; -90]*deg, ND_SedSkimmer)
SedSkimmerElbow := ElbowSUBF(SedSkimmerElbow_Origin, [0; 0; 270]*deg, ND_SedSkimmer, PS_Default, ["SedModLamella"])
SedSkimmerCoupling := CouplingSUBF(SedSkimmerCoupling_Origin, [0; 0; 90]*deg, ND_SedSkimmer, PS_Default, ["SedTankCon"])
SedSkimmerFittingScript := stack(SelectSedRemovables, SedSkimmerCap, SedRemovableFrz, SelectSedFittings, SedSkimmerElbow, SedSkimmerCoupling, SedFittingFrz)
# Skimmer Pipes
L_SedSkimmerVertPipe := SedSkimmerVertPipe_Origin[2] - SedSkimmerElbow_Origin[2]
L_SedSkimmerHorizPipe := W_SedInletChannelPreWeir + W_SedExitChannel + T_SedWeir + T_ChannelWall + T_PlantWall - CouplingLength(ND_SedSkimmer) + ConRadius(ND_SedSkimmer) + SocketDepth(ND_SedSkimmer) - ElbowRadius(ND_SedSkimmer)
SedSkimmerHorizPipe := PipeSUBF(SedSkimmerHorizPipe_Origin, L_SedSkimmerHorizPipe, [0; 0]*deg, ND_SedSkimmer, PS_Default, ["SedTankCon"])
SedSkimmerVertPipe := PipeSUBF(SedSkimmerVertPipe_Origin, L_SedSkimmerVertPipe, [0; -90]*deg, ND_SedSkimmer, PS_Default, ["SedModLamella"])
SedSkimmerPipeScript := stack(SelectSedPipes, SedSkimmerHorizPipe, SedSkimmerVertPipe, SedPipeFrz)
SedSkimmerScript := stack(SedSkimmerFittingScript, SedSkimmerPipeScript)
# Hopper Viewer
SedHopperViewerStub_Origin := [
    Plant_Origin[0] - L_Sed + W_SedInletChannelPreWeir + 2*T_SedWeir + W_SedExitChannelPostWeir + W_SedExitChannelPreWeir/2;
    SedManPipe_Origin[1] - ConRadius(ND_SedManifold) - 2*ConRadius(ND_SedSkimmer) - 2*S_Fitting - ConRadius(ND_SedHopperViewer);
    Z_SedExitChannelBottom - SocketDepth(ND_SedHopperViewer)
]
SedHopperViewerCoupling_Origin := SedHopperViewerStub_Origin
SedHopperViewerPipe_Origin := SedHopperViewerCoupling_Origin + [0 m; 0 m; -CouplingLength(ND_SedHopperViewer) + 2*SocketDepth(ND_SedHopperViewer)]
SedHopperViewerStub := PipeF(SedHopperViewerStub_Origin, SocketDepth(ND_SedHopperViewer) + H_SedExitChannel, [0; 90]*deg, ND_SedHopperViewer, PS_Default)
SedHopperViewerCoupling := CouplingSUBF(SedHopperViewerCoupling_Origin, [0; 270]*deg, ND_SedHopperViewer, PS_Default, ["SedTankCon"])
SedHopperViewerPipe := PipeSUBF(SedHopperViewerPipe_Origin, T_ChannelWall - CouplingLength(ND_SedHopperViewer) + SocketDepth(ND_SedHopperViewer), [0; 270]*deg, ND_SedHopperViewer, PS_Default, ["SedTankCon"])
SedHopperViewerScript := stack(SelectSedRemovables, SedHopperViewerStub, SedRemovableFrz, SelectSedFittings, SedHopperViewerCoupling, SedFittingFrz, SelectSedPipes, SedHopperViewerPipe, SedPipeFrz)
# Complete A Single Sed Tank (array and add walls) (diffusers added later since they are not arrayed)
ThawSedBayArray := ThawMultiple(["Sed*"])
ArraySedBay := array_all(N_SedBays, 1, W_SedBay)
FreezeSedBayArray := FreezeMultiple(["Sed*"])
ArraySedBayScript := stack(ThawSedBayArray, FreezeSedModComponents, ArraySedBay, FreezeSedBayArray)
SedWallUnderChannel := BoxF([0 m; W_Sed; 0 m] + Plant_Origin, [
    -L_Sed + W_SedInletChannelPreWeir + Plant_Origin[0];
    W_Sed + T_SedWallDivider + Plant_Origin[1];
    Z_SedExitChannelBottom
], [0; 0; 0]*deg)
SedWallAboveChannel := BoxF([0 m; W_Sed; H_Sed] + Plant_Origin, [
    -L_Sed + W_SedInletChannelPreWeir + W_SedExitChannel + T_ChannelWall + T_SedWeir;
    W_Sed + T_SedWallDivider;
    H_Sed - Z_SedExitChannelBottom - T_ChannelWall
] + Plant_Origin, [0; 0; 0]*deg)
SedPlateSupportLedgeScript := stack(SelectSedCon, SedWallUnderChannel, SedWallAboveChannel, FreezeSedTank)
CompleteSedTank :=
    SedPlateSupportLedgeScript if N_SedBays == 1
    stack(ArraySedBayScript, SedPlateSupportLedgeScript) otherwise
# Array Sed Tanks
ThawAllSed := ThawMultiple(["Sed*"])
ArraySedTank := Array_All(N_SedTanks, 1, W_Sed + T_SedWallDivider)
FreezeAllSed := FreezeMultiple(["Sed*"])
SelectSedConcrete := SelectLayer("SedTankCon")
SedTankArrayScript := stack(ThawAllSed, FreezeSedModComponents, ArraySedTank, FreezeAllSed, SelectSedConcrete, BrepAll, Union_All, FreezeSedTank)
# Floc Weir Baffle and Slot
# Note: Because we had to mirror instead of array the baffle components between sed bays, this section of code only works for 1 or 2 sed bays.
# Origins and Dimensions
L_SedBaffleWedge2Y := W_SedBay/2 - outerradius(ND_SedJetReverser) - (Z_SedManifoldPipe - (Z_SedSludge + T_ConcreteMin + outerradius(ND_SedJetReverser)))/tan(AN_SedSlope) - H_SedSlotDepth/sin(AN_SedSlope) - T_ConcreteMin + H_SedSlotDepth = 0.217008 m
L_SedBaffleWedge1Y :=
    L_SedBaffleWedge2Y if N_SedBays == 1
    (H_SedSlotDepth + W_SedBay/2 - (outerradius(ND_SedJetReverser) + (Z_SedManifoldPipe - (Z_SedSludge + T_ConcreteMin + outerradius(ND_SedJetReverser)))/tan(AN_SedSlope) + H_SedSlotDepth/sin(AN_SedSlope))) otherwise
    = 0.267008 m
SedBaffleWedge1_Origin := [
    Plant_Origin[0] - L_SedUpflow - T_ConcreteMin/2 - T_SedWeirBaffle/2;
    Plant_Origin[1] + W_SedBay/2 - outerradius(ND_SedJetReverser) - (Z_SedManifoldPipe - (Z_SedSludge + T_ConcreteMin + outerradius(ND_SedJetReverser)))/tan(AN_SedSlope) - H_SedSlotDepth/sin(AN_SedSlope);
    Z_SedSideSlopes - T_ConcreteMin*tan(AN_SedSlope)*(N_SedBays == 1)
]
SedBaffleWedge2_Origin := [
    Plant_Origin[0] - L_SedUpflow - T_ConcreteMin/2 - T_SedWeirBaffle/2;
    Plant_Origin[1] + W_SedBay/2 + outerradius(ND_SedJetReverser) + (Z_SedManifoldPipe - (Z_SedSludge + T_ConcreteMin + outerradius(ND_SedJetReverser)))/tan(AN_SedSlope) + H_SedSlotDepth/sin(AN_SedSlope);
    Z_SedSideSlopes - T_ConcreteMin*tan(AN_SedSlope)
]
# Cutting the Baffle Slot
SedBaffleSlot1 := BoxF([
    Plant_Origin[0] - L_SedUpflow - T_ConcreteMin/2 + T_SedWeirBaffle/2;
    Plant_Origin[1] + W_SedBay/2 - outerradius(ND_SedJetReverser) - (Z_SedManifoldPipe - (Z_SedSludge + T_ConcreteMin + outerradius(ND_SedJetReverser)))/tan(AN_SedSlope) - H_SedSlotDepth/sin(AN_SedSlope);
    Z_SedManifoldPipe
], [
    Plant_Origin[0] - L_SedUpflow - T_ConcreteMin/2 - T_SedWeirBaffle/2;
    Plant_Origin[1] + W_SedBay/2 + outerradius(ND_SedJetReverser) + (Z_SedManifoldPipe - (Z_SedSludge + T_ConcreteMin + outerradius(ND_SedJetReverser)))/tan(AN_SedSlope) + H_SedSlotDepth/sin(AN_SedSlope);
    Plant_Origin[2] + H_Sed
], [0; 0; 0]*deg)
SedBaffleSlot2 := WedgeF(SedBaffleWedge1_Origin, [
    SedBaffleWedge1_Origin[0] - L_SedBaffleWedge1Y;
    SedBaffleWedge1_Origin[1] - T_SedWeirBaffle;
    Z_SedManifoldPipe
], [90; 0; 0]*deg)
T_ConcreteMin/2 = 0.025 m
SedBaffleSlot3 := WedgeF(SedBaffleWedge2_Origin, [
    SedBaffleWedge2_Origin[0] - L_SedBaffleWedge2Y;
    SedBaffleWedge2_Origin[1] + T_SedWeirBaffle;
    Z_SedManifoldPipe
], [270; 0; 0]*deg)
SedBaffleSlot4 := BoxF([
    Plant_Origin[0] - L_SedUpflow - T_ConcreteMin/2 + T_SedWeirBaffle/2;
    Plant_Origin[1] + W_SedBay + H_SedSlotDepth - T_ConcreteMin;
    Z_SedSideSlopes - T_ConcreteMin*tan(AN_SedSlope)
], [
    Plant_Origin[0] - L_SedUpflow - T_ConcreteMin/2 - T_SedWeirBaffle/2;
    Plant_Origin[1] + W_SedBay/2 + outerradius(ND_SedJetReverser) + (Z_SedManifoldPipe - (Z_SedSludge + T_ConcreteMin + outerradius(ND_SedJetReverser)))/tan(AN_SedSlope) + H_SedSlotDepth/sin(AN_SedSlope);
    Plant_Origin[2] + H_Sed
], [0; 0; 0]*deg)
SedBaffleSlot5 := BoxF([
    Plant_Origin[0] - L_SedUpflow - T_ConcreteMin/2 + T_SedWeirBaffle/2;
    Plant_Origin[1] - H_SedSlotDepth + T_ConcreteMin*(N_SedBays == 1);
    Z_SedSideSlopes - T_ConcreteMin*tan(AN_SedSlope)*(N_SedBays == 1)
], [
    Plant_Origin[0] - L_SedUpflow - T_ConcreteMin/2 - T_SedWeirBaffle/2;
    Plant_Origin[1] + W_SedBay/2 - outerradius(ND_SedJetReverser) - (Z_SedManifoldPipe - (Z_SedSludge + T_ConcreteMin + outerradius(ND_SedJetReverser)))/tan(AN_SedSlope) - H_SedSlotDepth/sin(AN_SedSlope);
    Plant_Origin[2] + H_Sed
], [0; 0; 0]*deg)
MirrorSedBaffleBays := MirrorAll([Plant_Origin[0]; Plant_Origin[1] + W_Sed - W_SedBay], [Plant_Origin[0] + zc; Plant_Origin[1] + W_Sed - W_SedBay], "n")
SubtractSedConCutouts := SubtractF(["SedTankCon"], "DeleteMe")
SedBaffleSlotScript :=
    stack(SedBaffleSlot1, SedBaffleSlot2, SedBaffleSlot3, SedBaffleSlot4, SedBaffleSlot5, ArraySedTank, GroupDelete, SubtractSedConCutouts) if N_SedBays == 1
    stack(SedBaffleSlot1, SedBaffleSlot2, SedBaffleSlot3, SedBaffleSlot4, SedBaffleSlot5, MirrorSedBaffleBays, ArraySedTank, GroupDelete, SubtractSedConCutouts) otherwise
# Floc Weir Baffle
SedBaffleLayer := layer_new("SedBaffle", yellow)
SelectSedBaffle := SelectLayer("SedBaffle")
SedBafflePiece1 := BoxF([
    Plant_Origin[0] - L_SedUpflow - T_ConcreteMin/2 + T_SedWeirBaffle/2;
    Plant_Origin[1] + W_SedBay/2 - outerradius(ND_SedJetReverser) - (Z_SedManifoldPipe - (Z_SedSludge + T_ConcreteMin + outerradius(ND_SedJetReverser)))/tan(AN_SedSlope) - H_SedSlotDepth/sin(AN_SedSlope);
    Z_SedManifoldPipe
], [
    Plant_Origin[0] - L_SedUpflow - T_ConcreteMin/2 - T_SedWeirBaffle/2;
    Plant_Origin[1] + W_SedBay/2 + outerradius(ND_SedJetReverser) + (Z_SedManifoldPipe - (Z_SedSludge + T_ConcreteMin + outerradius(ND_SedJetReverser)))/tan(AN_SedSlope) + H_SedSlotDepth/sin(AN_SedSlope);
    Z_SedFlocWeir
], [0; 0; 0]*deg)
SedBafflePiece2 := WedgeF(SedBaffleWedge1_Origin, [
    SedBaffleWedge1_Origin[0] - L_SedBaffleWedge1Y;
    SedBaffleWedge1_Origin[1] - T_SedWeirBaffle;
    Z_SedManifoldPipe
], [90; 0; 0]*deg)
SedBafflePiece3 := WedgeF(SedBaffleWedge2_Origin, [
    SedBaffleWedge2_Origin[0] - L_SedBaffleWedge2Y;
    SedBaffleWedge2_Origin[1] + T_SedWeirBaffle;
    Z_SedManifoldPipe
], [270; 0; 0]*deg)
SedBafflePiece4 := BoxF([
    Plant_Origin[0] - L_SedUpflow - T_ConcreteMin/2 + T_SedWeirBaffle/2;
    Plant_Origin[1] + W_SedBay + H_SedSlotDepth - T_ConcreteMin;
    Z_SedSideSlopes - T_ConcreteMin*tan(AN_SedSlope)
], [
    Plant_Origin[0] - L_SedUpflow - T_ConcreteMin/2 - T_SedWeirBaffle/2;
    Plant_Origin[1] + W_SedBay/2 + outerradius(ND_SedJetReverser) + (Z_SedManifoldPipe - (Z_SedSludge + T_ConcreteMin + outerradius(ND_SedJetReverser)))/tan(AN_SedSlope) + H_SedSlotDepth/sin(AN_SedSlope);
    Z_SedFlocWeir
], [0; 0; 0]*deg)
SedBafflePiece5 := BoxF([
    Plant_Origin[0] - L_SedUpflow - T_ConcreteMin/2 + T_SedWeirBaffle/2;
    Plant_Origin[1] - H_SedSlotDepth + T_ConcreteMin*(N_SedBays == 1);
    Z_SedSideSlopes - T_ConcreteMin*tan(AN_SedSlope)*(N_SedBays == 1)
], [
    Plant_Origin[0] - L_SedUpflow - T_ConcreteMin/2 - T_SedWeirBaffle/2;
    Plant_Origin[1] + W_SedBay/2 - outerradius(ND_SedJetReverser) - (Z_SedManifoldPipe - (Z_SedSludge + T_ConcreteMin + outerradius(ND_SedJetReverser)))/tan(AN_SedSlope) - H_SedSlotDepth/sin(AN_SedSlope);
    Z_SedFlocWeir
], [0; 0; 0]*deg)
SedBaffleFrz := FreezeLayer("SedBaffle")
SedManifoldRestCutout := CylinderF([
    -L_Sed + L_SedHopper + T_ConcreteMin;
    W_SedBay/2 + (-W_SedDiffuserOutlet/2) - S_FromSedWall + innerdiameter(ND_SedJetReverser, PS_Default)/2;
    Z_SedManifoldPipe + S_FromSedWall
] + Plant_Origin, ConRadius(ND_SedManifold), 2*T_ConcreteMin, [0; 0]*deg)
SedBaffleSemicircleCut := SubtractF(["SedBaffle"], "DeleteMe")
ArraySedBaffle := array_all(N_SedBays, 1, W_SedBay)
ArraySedBaffleSemicircleCut := array_all(N_SedBays, 1, W_SedBay)
# after union, add mirror to mirror baffle, then cut out cylinder, array that for multiple sed bays (ArraySedBaffle), then array tank
SedBaffleScript :=
    stack(SedBaffleLayer, SedBafflePiece1, SedBafflePiece2, SedBafflePiece3, SedBafflePiece4, SedBafflePiece5, Union_All, SedBaffleFrz, SedManifoldRestCutout, GroupDelete, SedBaffleSemicircleCut, SelectSedBaffle, ArraySedTank, SedBaffleFrz) if N_SedBays == 1
    stack(SedBaffleLayer, SedBafflePiece1, SedBafflePiece2, SedBafflePiece3, SedBafflePiece4, SedBafflePiece5, Union_All, MirrorSedBaffleBays, SedBaffleFrz, SedManifoldRestCutout, ArraySedBaffleSemicircleCut, GroupDelete, SedBaffleSemicircleCut, SelectSedBaffle, ArraySedTank, SedBaffleFrz) otherwise
SedFlocWeirScript := stack(SedBaffleSlotScript, SedBaffleScript)
SedDiffuser_Origin := [
    Plant_Origin[0] - L_Sed + L_SedHopper + L_SedDiffuserOutlet/2 + T_SedDiffuserWall + (W_SedInletChannelPreWeir + T_PlantWall)*(EN_InletChannelGeom == Inlet_FullDepth);
    SedManPipe_Origin[1];
    -innerdiameter(ND_SedManifold, PS_Default)/2 + SedManPipe_Origin[2]
]
SedDiffLayer := layer_new("SedManifoldDiffuserPlu", blue)
SedDiffOuterCircleSection := circle([SedDiffuser_Origin[0]; SedDiffuser_Origin[1]; SedDiffuser_Origin[2]], outerradius(ND_SedDiffuser))
SedDiffOuterRectangleSection := Pline3D([
    [
        SedDiffuser_Origin[0] + L_SedDiffuserOutlet/2 + T_SedDiffuserWall;
        SedDiffuser_Origin[1] + W_SedDiffuserOutlet/2 + T_SedDiffuserWall;
        SedDiffuser_Origin[2] - L_SedManifoldDiffuser
    ];
    [
        SedDiffuser_Origin[0] - L_SedDiffuserOutlet/2 - T_SedDiffuserWall;
        SedDiffuser_Origin[1] + W_SedDiffuserOutlet/2 + T_SedDiffuserWall;
        SedDiffuser_Origin[2] - L_SedManifoldDiffuser
    ];
    [
        SedDiffuser_Origin[0] - L_SedDiffuserOutlet/2 - T_SedDiffuserWall;
        SedDiffuser_Origin[1] - W_SedDiffuserOutlet/2 - T_SedDiffuserWall;
        SedDiffuser_Origin[2] - L_SedManifoldDiffuser
    ];
    [
        SedDiffuser_Origin[0] + L_SedDiffuserOutlet/2 + T_SedDiffuserWall;
        SedDiffuser_Origin[1] - W_SedDiffuserOutlet/2 - T_SedDiffuserWall;
        SedDiffuser_Origin[2] - L_SedManifoldDiffuser
    ];
    [
        SedDiffuser_Origin[0] + L_SedDiffuserOutlet/2 + T_SedDiffuserWall;
        SedDiffuser_Origin[1] + W_SedDiffuserOutlet/2 + T_SedDiffuserWall;
        SedDiffuser_Origin[2] - L_SedManifoldDiffuser
    ]
])
SedDiffZoomOuter := ZoomWindow([SedDiffuser_Origin[0] - L_SedDiffuserOutlet; SedDiffuser_Origin[1] + W_SedDiffuserOutlet], [SedDiffuser_Origin[0] + L_SedDiffuserOutlet; SedDiffuser_Origin[1] - W_SedDiffuserOutlet])
SedDiffOuterLoft := Loft([SedDiffuser_Origin[0] + outerradius(ND_SedDiffuser); SedDiffuser_Origin[1]; SedDiffuser_Origin[2]], [
    SedDiffuser_Origin[0] + L_SedDiffuserOutlet/2 + T_SedDiffuserWall;
    SedDiffuser_Origin[1] + W_SedDiffuserOutlet/2 + T_SedDiffuserWall;
    SedDiffuser_Origin[2] - L_SedManifoldDiffuser
])
SedDiffuserFreeze := FreezeLayer("SedManifoldDiffuserPlu")
SedDiffInnerCircleSection := circle([SedDiffuser_Origin[0]; SedDiffuser_Origin[1]; SedDiffuser_Origin[2]], innerdiameter(ND_SedDiffuser, PS_Default)/2)
SedDiffInnerRectangleSection := Pline3D([
    [
        SedDiffuser_Origin[0] + L_SedDiffuserOutlet/2;
        SedDiffuser_Origin[1] + W_SedDiffuserOutlet/2;
        SedDiffuser_Origin[2] - L_SedManifoldDiffuser
    ];
    [
        SedDiffuser_Origin[0] - L_SedDiffuserOutlet/2;
        SedDiffuser_Origin[1] + W_SedDiffuserOutlet/2;
        SedDiffuser_Origin[2] - L_SedManifoldDiffuser
    ];
    [
        SedDiffuser_Origin[0] - L_SedDiffuserOutlet/2;
        SedDiffuser_Origin[1] - W_SedDiffuserOutlet/2;
        SedDiffuser_Origin[2] - L_SedManifoldDiffuser
    ];
    [
        SedDiffuser_Origin[0] + L_SedDiffuserOutlet/2;
        SedDiffuser_Origin[1] - W_SedDiffuserOutlet/2;
        SedDiffuser_Origin[2] - L_SedManifoldDiffuser
    ];
    [
        SedDiffuser_Origin[0] + L_SedDiffuserOutlet/2;
        SedDiffuser_Origin[1] + W_SedDiffuserOutlet/2;
        SedDiffuser_Origin[2] - L_SedManifoldDiffuser
    ]
])
SedDiffZoomInner := ZoomWindow([SedDiffuser_Origin[0] - L_SedDiffuserOutlet; SedDiffuser_Origin[1] + W_SedDiffuserOutlet], [SedDiffuser_Origin[0] + L_SedDiffuserOutlet; SedDiffuser_Origin[1] - W_SedDiffuserOutlet])
SedDiffInnerLoft := Loft([
    SedDiffuser_Origin[0] + innerdiameter(ND_SedDiffuser, PS_Default)/2;
    SedDiffuser_Origin[1];
    SedDiffuser_Origin[2]
], [
    SedDiffuser_Origin[0] + L_SedDiffuserOutlet/2;
    SedDiffuser_Origin[1] + W_SedDiffuserOutlet/2;
    SedDiffuser_Origin[2] - L_SedManifoldDiffuser
])
SedDiffGroupInner := GroupAll("DeleteMe")
SedDiffSubtract := SubtractF(["SedManifoldDiffuserPlu"], "DeleteMe")
SedDiffSelect := SelectLayer("SedManifoldDiffuserPlu")
SedDiffArray := Array_All(1, N_SedManifoldPorts, B_SedManifoldPort)
SedDiffuserScript := stack(SedDiffLayer, SedDiffOuterCircleSection, SedDiffOuterRectangleSection, SedDiffZoomOuter, SedDiffOuterLoft, SedDiffuserFreeze, SedDiffInnerCircleSection, SedDiffInnerRectangleSection, SedDiffZoomInner, SedDiffInnerLoft, SedDiffGroupInner, SedDiffSubtract, SedDiffSelect, SedDiffArray, SedDiffuserFreeze)
# Inlet Manifold Diffusers
# Finish Inlet and Exit Channels, and add last wall (includes remaining manifold plumbing)
# Finish tank walls
SelectSedCon
SedLowerWall := BoxF([-L_Sed; -T_PlantWall; H_Sed] + Plant_Origin, Plant_Origin, [0; 0; 0]*deg)
SedChannelECap := BoxF([-L_Sed + W_SedInletChannelPreWeir; (W_Sed + T_PlantWall)*N_SedTanks; H_Sed] + Plant_Origin, [
    -L_Sed + W_SedInletChannelPreWeir + W_SedExitChannel + T_SedWeir + Plant_Origin[0];
    -T_PlantWall + (W_Sed + T_PlantWall)*N_SedTanks + Plant_Origin[1];
    Z_SedExitChannelBottom
], [0; 0; 0]*deg) = "_box -3.76688,6.8508,1.87803 -3.38688,6.7008,1.46276"
SedChannelICapNorthPostWeir := BoxF([-L_Sed; (W_Sed + T_PlantWall)*N_SedTanks; H_Sed] + Plant_Origin, [
    -L_Sed - T_SedWeir - W_SedInletChannelPostWeir + Plant_Origin[0];
    -T_PlantWall + (W_Sed + T_PlantWall)*N_SedTanks + Plant_Origin[1];
    Z_SedInletChannelBottomPostWeir
], [0; 0; 0]*deg) = "_box -4.08214,6.8508,1.87803 -4.41073,6.7008,1.46276"
SedChannelICapNorthPreWeir := BoxF([-L_Sed; (W_Sed + T_PlantWall)*N_SedTanks; H_Sed - H_SedInletChannelPreWeir] + Plant_Origin, [
    -L_Sed + W_SedInletChannelPreWeir + Plant_Origin[0];
    -T_PlantWall + (W_Sed + T_PlantWall)*N_SedTanks + Plant_Origin[1];
    Plant_Origin[2]
], [0; 0; 0]*deg) = "_box -4.08214,6.8508,1.46276 -3.76688,6.7008,0"
SedInnerChannelsCapSouth := BoxF([-L_Sed; 0; H_Sed] + Plant_Origin, [
    -L_Sed + W_SedInletChannelPreWeir + T_SedWeir + W_SedExitChannel + Plant_Origin[0];
    -T_PlantWall + Plant_Origin[1];
    Z_SedInletChannelBottomPreWeir
], [0; 0; 0]*deg)
SedIChannelCapSouth := BoxF([-L_Sed; 0; H_Sed] + Plant_Origin, [
    -L_Sed - T_PlantWall - W_SedInletChannelPostWeir - T_SedWeir + Plant_Origin[0];
    -T_PlantWall + Plant_Origin[1];
    Z_SedInletChannelBottomPostWeir
], [0; 0; 0]*deg)
SedTankWalls := stack(SelectSedCon, SedLowerWall, SedChannelECap, SedChannelICapNorthPostWeir, SedChannelICapNorthPreWeir, SedInnerChannelsCapSouth, SedIChannelCapSouth)
# Channel Weirs and Dividing Wall
SedExitChannelWeirY := BoxF([
    Plant_Origin[0] - L_Sed + W_SedInletChannelPreWeir + T_SedWeir + W_SedExitChannelPostWeir;
    Plant_Origin[1];
    Z_SedExitChannelBottom
], [
    Plant_Origin[0] - L_Sed + W_SedInletChannelPreWeir + 2*T_SedWeir + W_SedExitChannelPostWeir;
    Plant_Origin[1] - T_PlantWall + (W_SedBay*N_SedBays + T_PlantWall)*N_SedTanks - S_Fitting - OuterDiameterFittingPVC(ND_FiEntrancePipe);
    Z_SedExitChannelBottom + H_SedWeirExit
], [0; 0; 0]*deg)
SedExitChannelWeirX := BoxF([
    Plant_Origin[0] - L_Sed + W_SedInletChannelPreWeir + T_SedWeir + W_SedExitChannelPostWeir;
    Plant_Origin[1] - T_PlantWall + (W_Sed + T_PlantWall)*N_SedTanks - OuterDiameterFittingPVC(ND_FiEntrancePipe) - S_Fitting - T_SedWeir;
    Z_SedExitChannelBottom
], [
    Plant_Origin[0] - L_Sed + W_SedInletChannelPreWeir + T_SedWeir + W_SedExitChannel;
    Plant_Origin[1] - T_PlantWall + (W_Sed + T_PlantWall)*N_SedTanks - S_Fitting - OuterDiameterFittingPVC(ND_FiEntrancePipe);
    Z_SedExitChannelBottom + H_SedWeirExit
], [0; 0; 0]*deg)
SedChannelExitWeirScript := stack(SedExitChannelWeirY, SedExitChannelWeirX)
SedChannelWeirScript :=
    stack(SedTankWalls, SedChannelExitWeirScript) if N_FiEntrancePipes == 1
    SedTankWalls otherwise
SedManCoupling_Origin(N_Bays) := [
    -ElbowRadius(ND_SedManifold) + SedManElbow_Origin[0];
    W_SedBay*N_Bays + floor(N_Bays/N_SedBays)*T_SedWallDivider + SedManElbow_Origin[1];
    Plant_Origin[2] + H_Sed - H_SedInletChannelPreWeir - CouplingLength(ND_SedManifold) + SocketDepth(ND_SedManifold) + H_SedInletChannelIncrement*(N_SedBays*N_SedTanks - 1) - H_SedInletChannelIncrement*N_Bays
]
# Sed Inlet Floor
SedInletFlatFloor :=
    Local ← BoxF([Plant_Origin[0] - L_Sed; ConRadius(ND_SedManifold) + SedManCoupling_Origin(0)[1]; Plant_Origin[2]], [
        Plant_Origin[0] - L_Sed + W_SedInletChannelPreWeir;
        Plant_Origin[1];
        Plant_Origin[2] + H_Sed + H_SedInletChannelIncrement*(N_SedBays*N_SedTanks - 1) - H_SedInletChannelPreWeir
    ], [0; 0; 0]*deg)
    if N_SedTanks*N_SedBays > 2
        for i ∈ 1 .. N_SedTanks*N_SedBays - 2
            Local ← stack(Local, BoxF([
                Plant_Origin[0] - L_Sed;
                ConRadius(ND_SedManifold) + SedManCoupling_Origin(i - 1)[1];
                Plant_Origin[2]
            ], [
                Plant_Origin[0] - L_Sed + W_SedInletChannelPreWeir;
                SedManCoupling_Origin(i)[1] + ConRadius(ND_SedManifold);
                Plant_Origin[2] + H_Sed - H_SedInletChannelPreWeir + H_SedInletChannelIncrement*(N_SedBays*N_SedTanks - (i + 1))
            ], [0; 0; 0]*deg))
    return stack(Local, BoxF([
        Plant_Origin[0] - L_Sed;
        -ConRadius(ND_SedManifold) + SedManCoupling_Origin(N_SedTanks*N_SedBays - 1)[1];
        Plant_Origin[2]
    ], [
        Plant_Origin[0] - L_Sed + W_SedInletChannelPreWeir;
        Plant_Origin[1] + W_SedBay*N_SedBays*N_SedTanks + T_PlantWall*(N_SedTanks - 1);
        Plant_Origin[2] + H_Sed - H_SedInletChannelPreWeir
    ], [0; 0; 0]*deg))
SedInletChannelSlopes :=
    Local ← WedgeF([
        Plant_Origin[0] - L_Sed;
        ConRadius(ND_SedManifold) + SedManCoupling_Origin(0)[1];
        Plant_Origin[2] + H_Sed - H_SedInletChannelPreWeir + H_SedInletChannelIncrement*(N_SedBays*N_SedTanks - 2)
    ], [
        Plant_Origin[0] - L_Sed - (SedManCoupling_Origin(1)[1] - SedManCoupling_Origin(0)[1]) + 2*ConRadius(ND_SedManifold);
        ConRadius(ND_SedManifold) + SedManCoupling_Origin(0)[1] + W_SedInletChannelPreWeir;
        Plant_Origin[2] + H_Sed - H_SedInletChannelPreWeir + H_SedInletChannelIncrement*(N_SedBays*N_SedTanks - 1)
    ], [270; 0; 0]*deg)
    if N_SedTanks*N_SedBays > 2
        for i ∈ 1 .. N_SedTanks*N_SedBays - 2
            Local ← stack(Local, WedgeF([
                Plant_Origin[0] - L_Sed;
                ConRadius(ND_SedManifold) + SedManCoupling_Origin(i)[1];
                Plant_Origin[2] + H_Sed - H_SedInletChannelPreWeir + H_SedInletChannelIncrement*(N_SedBays*N_SedTanks - (i + 2))
            ], [
                Plant_Origin[0] - L_Sed - (SedManCoupling_Origin(i + 1)[1] - SedManCoupling_Origin(i)[1]) + 2*ConRadius(ND_SedManifold);
                ConRadius(ND_SedManifold) + SedManCoupling_Origin(i)[1] + W_SedInletChannelPreWeir;
                Plant_Origin[2] + H_Sed - H_SedInletChannelPreWeir + H_SedInletChannelIncrement*(N_SedBays*N_SedTanks - (i + 1))
            ], [270; 0; 0]*deg))
    Local
FinishSedChannelScript := stack(SedChannelWeirScript, SedInletFlatFloor, SedInletChannelSlopes, Union_All, FreezeSedTank)
# Manifold Plumbing
L_SedManPipeVert :=
    for i ∈ 0 .. N_SedTanks*N_SedBays - 1
        L[i] ← SedManCoupling_Origin(i)[2] - SedManElbow_Origin[2] - ElbowRadius(ND_SedManifold)
    L
SedManifoldCoupling :=
    Local ← SelectSedFittings
    for i ∈ 0 .. N_SedTanks*N_SedBays - 1
        Local ← stack(Local, CouplingSUBF(SedManCoupling_Origin(i), [0; 90]*deg, ND_SedManifold, PS_Default, ["SedTankCon"]))
    return stack(Local, SedFittingFrz)
SedManifoldPipeVert :=
    Local ← SelectSedPipes
    for i ∈ 0 .. N_SedTanks*N_SedBays - 1
        Local ← stack(Local, PipeSUBF(SedManCoupling_Origin(i), L_SedManPipeVert[i], [0; 270]*deg, ND_SedManifold, PS_Default, ["SedTankCon"]))
    return stack(Local, SedPipeFrz)
L_SedManStopper :=
    for i ∈ 0 .. N_SedTanks*N_SedBays - 1
        L[i] ← H_SedInletChannelPreWeir + SocketDepth(ND_SedManifold) - H_SedInletChannelIncrement*(N_SedBays*N_SedTanks - i)
    L
SedManStopper :=
    Local ← SedRemovableLayer
    for i ∈ 0 .. N_SedTanks*N_SedBays - 1
        Local ← stack(Local, PipeF([
            Plant_Origin[0] - L_Sed + S_Fitting + ConRadius(ND_SedManifold);
            SedManCoupling_Origin(i)[1];
            SedManCoupling_Origin(i)[2] + CouplingLength(ND_SedManifold) - 2*SocketDepth(ND_SedManifold)
        ], L_SedManStopper[i], [0; 90]*deg, ND_SedManifold, PS_Default))
    return stack(Local, SedRemovableFrz)
FinishManifoldPlu := stack(SedManifoldCoupling, SedManifoldPipeVert, SedManStopper)
# Inlet Channel Drain
# Origins and Dimensions
SedIChannelDrainVertCoupling_Origin := [
    Plant_Origin[0] - L_Sed - W_SedInletChannelPostWeir - T_SedWeir + ConRadius(ND_SedChannelDrain) + S_Fitting/2;
    Plant_Origin[1] + S_Fitting + ConRadius(ND_SedChannelDrain);
    Plant_Origin[2] + H_Sed - H_SedInletChannelPostWeir - CouplingLength(ND_SedChannelDrain) + SocketDepth(ND_SedChannelDrain)
]
L_SedIChannelVertPipe := Plant_Origin[2] + H_Sed - H_SedInletChannelPostWeir - CouplingLength(ND_SedChannelDrain) - ElbowRadius(ND_SedChannelDrain) - ConRadius(ND_SedChannelDrain)
# Inlet Channel Drain Fittings
SedIChannelDrainVertCoupling := CouplingSUBF(SedIChannelDrainVertCoupling_Origin, [0; 90; 0]*deg, ND_SedChannelDrain, PS_Default, ["SedTankCon"])
SedIChannelDrainElbow := ElbowF(SedIChannelDrainVertCoupling_Origin + [0 m; 0 m; -L_SedIChannelVertPipe], [90; 270; 0]*deg, ND_SedChannelDrain, PS_Default)
SedInletChannelDrainFittingScript := stack(SelectSedFittings, SedIChannelDrainVertCoupling, SedIChannelDrainElbow, SedFittingFrz)
# Inlet Channel Drain Pipes
SedIChannelDrainVertPipe := PipeSUBF(SedIChannelDrainVertCoupling_Origin, L_SedIChannelVertPipe, [0; 270; 0]*deg, ND_SedChannelDrain, PS_Default, ["SedTankCon"])
SedIChannelDrainStub := PipeF(SedIChannelDrainVertCoupling_Origin + [0 m; 0 m; CouplingLength(ND_SedChannelDrain) - 2*SocketDepth(ND_SedChannelDrain)], H_SedInletChannelPostWeir + SocketDepth(ND_SedChannelDrain), [0; 90; 0]*deg, ND_SedChannelDrain, PS_Default)
SedInletChannelDrainPipeScript := stack(SelectSedPipes, SedIChannelDrainVertPipe, SedPipeFrz, SelectSedRemovables, SedIChannelDrainStub, SedRemovableFrz)
SedInletDrainScript := stack(SedInletChannelDrainFittingScript, SedInletChannelDrainPipeScript)
# Outlets to Filter
# Origins and Dimensions
# high flow origins
SedOutletCouplingHigh_Origin(N) := [
    Plant_Origin[0] - L_Sed + CouplingLength(ND_FiEntrancePipe) - SocketDepth(ND_FiEntrancePipe) - T_PlantWall;
    Plant_Origin[1] - T_PlantWall + (W_SedBay*N_SedBays + T_PlantWall)*N_SedTanks - ConRadius(ND_FiEntrancePipe) - S_Fitting - (N - 1)*W_SedBay - T_PlantWall*floor((N - 1)/N_SedBays);
    Z_SedExitChannelBottom + ConRadius(ND_FiEntrancePipe)
]
L_SedOutletHorizPipeHigh := T_PlantWall + T_SedWeir + W_SedInletChannelPreWeir - CouplingLength(ND_FiEntrancePipe) + SocketDepth(ND_FiEntrancePipe)
# mid flow origins
SedOutletCoupling1Mid_Origin(N) := [
    Plant_Origin[0] - L_Sed + W_SedInletChannelPreWeir + T_SedWeir + ConRadius(ND_FiEntrancePipe);
    Plant_Origin[1] - T_PlantWall + (W_SedBay*N_SedBays + T_PlantWall)*N_SedTanks - ConRadius(ND_FiEntrancePipe) - S_Fitting - (N - 1)*W_SedBay - T_PlantWall*floor((N - 1)/N_SedBays);
    Z_SedExitChannelBottom - SocketDepth(ND_FiEntrancePipe)
]
SedOutletVertPipe_Origin(N) := SedOutletCoupling1Mid_Origin(N) + [0; 0; 2*SocketDepth(ND_FiEntrancePipe) - CouplingLength(ND_FiEntrancePipe)]
L_SedOutletVertPipe := 2*SocketDepth(ND_FiEntrancePipe) + max(0, T_ChannelWall - CouplingLength(ND_FiEntrancePipe))
SedOutletElbow_Origin(N) := SedOutletVertPipe_Origin(N) - [0; 0; L_SedOutletVertPipe]
SedOutletCoupling2Mid_Origin(N) := [
    Plant_Origin[0] - T_PlantWall - L_Sed + CouplingLength(ND_FiEntrancePipe) - SocketDepth(ND_FiEntrancePipe);
    SedOutletElbow_Origin(N)[1];
    -ElbowRadius(ND_FiEntrancePipe) + SedOutletElbow_Origin(N)[2]
]
SedOutletHorizPipe_Origin(N) := [-ElbowRadius(ND_FiEntrancePipe); 0; -ElbowRadius(ND_FiEntrancePipe)] + SedOutletElbow_Origin(N)
# Sed Outlet Fittings
SedOutletCoupling1ScriptMid :=
    Local ← SelectSedFittings
    for i ∈ 1 .. N_FiEntrancePipes
        OutletCoupling ← CouplingSUBF(SedOutletCoupling1Mid_Origin(i), [0; 270]*deg, ND_FiEntrancePipe, PS_Default, ["SedTankCon"])
        Local ← stack(Local, OutletCoupling)
    Local ← stack(Local, SedFittingFrz)
    return Local
SedOutletElbowScript :=
    Local ← SelectSedFittings
    for i ∈ 1 .. N_FiEntrancePipes
        OutletElbow ← ElbowSUBF(SedOutletElbow_Origin(i), [0; 0; 270]*deg, ND_FiEntrancePipe, PS_Default, ["SedTankCon"])
        Local ← stack(Local, OutletElbow)
    Local ← stack(Local, SedFittingFrz)
    return Local
SedOutletCoupling2ScriptMid :=
    Local ← SelectSedFittings
    for i ∈ 1 .. N_FiEntrancePipes
        OutletCoupling ← CouplingSUBF(SedOutletCoupling2Mid_Origin(i), [0; 0]*deg, ND_FiEntrancePipe, PS_Default, ["SedTankCon"])
        Local ← stack(Local, OutletCoupling)
    Local ← stack(Local, SedFittingFrz)
    return Local
SedOutletFittingsMid := stack(SedOutletCoupling1ScriptMid, SedOutletElbowScript, SedOutletCoupling2ScriptMid)
SedOutletCouplingScriptHigh :=
    Local ← SelectSedFittings
    for i ∈ 1 .. N_FiEntrancePipes
        OutletCoupling ← CouplingSUBF(SedOutletCouplingHigh_Origin(i), [0; 0]*deg, ND_FiEntrancePipe, PS_Default, ["SedTankCon"])
        Local ← stack(Local, OutletCoupling)
    Local ← stack(Local, SedFittingFrz)
    return Local
SedOutletFittings :=
    SedOutletFittingsMid if EN_InletChannelGeom ≠ Inlet_FullDepth
    SedOutletCouplingScriptHigh otherwise
# Sed Outlet Pipes
SedOutletVertPipeScriptMid :=
    Local ← SelectSedPipes
    for i ∈ 1 .. N_FiEntrancePipes
        OutletPipe ← PipeSUBF(SedOutletVertPipe_Origin(i), L_SedOutletVertPipe, [0; 270]*deg, ND_FiEntrancePipe, PS_Default, ["SedTankCon"])
        Local ← stack(Local, OutletPipe)
    Local ← stack(Local, SedPipeFrz)
    return Local
SedOutletHorizPipeScriptMid :=
    Local ← SelectSedPipes
    for i ∈ 1 .. N_FiEntrancePipes
        OutletPipe ← PipeSUBF(SedOutletHorizPipe_Origin(i), SedOutletElbow_Origin(i)[0] - ElbowRadius(ND_FiEntrancePipe) - (Plant_Origin[0] - T_PlantWall - L_Sed + CouplingLength(ND_FiEntrancePipe) - SocketDepth(ND_FiEntrancePipe)), [0; 0]*deg, ND_FiEntrancePipe, PS_Default, ["SedTankCon"])
        Local ← stack(Local, OutletPipe)
    Local ← stack(Local, SedPipeFrz)
    return Local
SedOutletPipeScriptMid := stack(SedOutletVertPipeScriptMid, SedOutletHorizPipeScriptMid)
SedOutletPipeScriptHigh :=
    Local ← SelectSedPipes
    for i ∈ 1 .. N_FiEntrancePipes
        OutletPipe ← PipeSUBF(SedOutletCouplingHigh_Origin(i) + [L_SedOutletHorizPipeHigh; 0; 0], L_SedOutletHorizPipeHigh, [0; 0]*deg, ND_FiEntrancePipe, PS_Default, ["SedTankCon"])
        Local ← stack(Local, OutletPipe)
    Local ← stack(Local, SedPipeFrz)
    return Local
SedOutletPipeScript :=
    SedOutletPipeScriptMid if EN_InletChannelGeom ≠ Inlet_FullDepth
    SedOutletPipeScriptHigh otherwise
SedOutletScript := stack(SedOutletFittings, SedOutletPipeScript)
# Add Water Levels
SedWaterLayer := layer_new("SedWater", blue2)
SedWaterBox := BoxF(Plant_Origin, [-L_SedUpflow; W_Sed; HW_Sed] + Plant_Origin, [0; 0; 0]*deg)
SedIChannelWater := BoxF([Plant_Origin[0] - L_Sed; Plant_Origin[1]; Plant_Origin[2] + H_Sed - H_SedInletChannelPreWeir], [Plant_Origin[0] - L_Sed; Plant_Origin[1]; Plant_Origin[2] + H_Sed - H_SedInletChannelPreWeir] + [W_SedInletChannelPreWeir + T_SedWeir + W_SedInletChannelPostWeir; W_Sed; HW_SedInletChannelPreWeir], [0; 0; 0]*deg)
SedEChannelWater := BoxF([
    Plant_Origin[0] - L_Sed + W_SedInletChannel + 2*T_SedWeir + W_SedExitChannelPostWeir;
    Plant_Origin[1];
    Z_SedExitChannelBottom
], [
    Plant_Origin[0] - L_Sed + W_SedInletChannel + T_SedWeir + W_SedExitChannel;
    Plant_Origin[1] + W_Sed;
    Z_SedExitChannelBottom + HW_SedExitChannelPreWeir
], [0; 0; 0]*deg)
SedWaterFrz := FreezeLayer("SedWater")
SedWaterScript := stack(SedWaterLayer, SedWaterBox, SedIChannelWater, SedEChannelWater, SedWaterFrz)
AC_SedTankWater := stack(SedConScript, SedDrainCoverScript, SedManifoldScript, SedLaunderScript, SedLamellaScript, SedSkimmerScript, SedHopperViewerScript, CompleteSedTank, SedTankArrayScript, SedFlocWeirScript, SedDiffuserScript, FinishSedChannelScript, FinishManifoldPlu, SedInletDrainScript, SedOutletScript, SedWaterScript)
AC_SedTank := stack(SedConScript, SedDrainCoverScript, SedManifoldScript, SedLaunderScript, SedLamellaScript, SedSkimmerScript, SedHopperViewerScript, CompleteSedTank, SedTankArrayScript, SedFlocWeirScript, SedDiffuserScript, FinishSedChannelScript, FinishManifoldPlu, SedInletDrainScript, SedOutletScript)
AC_SedTank :=
    AC_SedTank if EN_Water == 0
    AC_SedTankWater otherwise
# [component: inputs stack(AC_SedTank)]
