# [reference: MasterProgram.xmcd]
N_Fi := 2
newechannel_origin := [echannel_origin[0]; -W_ExitChannel/2; echannel_origin[2]]
# Arbitrary design variables.
# for box spacing and heights
FilterInletTank_origin := [echanneltank_origin[0]; echanneltank_origin[1]; echanneltank_origin[2]] = [0; -0.57432; 1.38183] m
BoxDist := 2 m
# horizontal distance from inlet box to filter
Headloss := 10 cm  # difference in depth between inlet and outlet box
FilterInletBox_origin := [echannelbox_origin[0] - T_PlantWall; echannelbox_origin[1] - W_ExitChannel; echannelbox_origin[2]] = [-0.523167; -0.523167; 1.38183] m
echanneltank_dim = [0.373167; 0.42432; 0.355898] m
filterinletbox_dim := [T_PlantWall; W_ExitChannel; H_ExitChannel] = [0.15; 0.373167; 0.355898] m
FilterBox1_origin := [
    FiInletTank_Origin[0] - W_FiEntrance - W_FiExit - 3*W_PlantWall - S_Walkway;
    FiInletTank_Origin[1];
    Z_FiBottom
]  # error: This variable is undefined.
FilterBox_dim := [L_Fi + T_PipeCap; W_Fi + 2*T_ConcreteMin + OuterDiameterFittingPVC(ND_FiBwTrunk); H_Fi]  # error: This variable is undefined.
FilterBox2_origin := [FilterBox1_origin[0]; FilterBox1_origin[1] + FilterBox_dim[1] + T_PlantWall; FilterBox1_origin[2]]  # error: This variable is undefined.
FilterBoxScript := □  # error: This placeholder is empty.
Filterinletchannelscript :=
    layer2 ← layer_new("echannel2", ltgrey)
    channel1 ← ChannelDrawing([FilterInletTank_origin[0] - W_ExitChannel; 0; FilterInletTank_origin[2]], [((N_Fi*2*T_PlantWall) + ((N_Fi + 1)*W_ExitChannel)) + 2*T_PlantWall; W_ExitChannel; H_ExitChannel], T_ChannelWall)
    rotate1 ← rotate([FilterInletTank_origin[0] - W_ExitChannel; 0; FilterInletTank_origin[2]], 270)
    bigunion ← union_allA
    layerset ← layer_set("0")
    layerfreeze2 ← layer_freeze("echannel2")
    one ← stack(layer2, channel1, rotate1, bigunion, layerset, layerfreeze2)
    return ← one
sedechanneltankscript :=
    layernewect ← layer_new("echanneltank", ltgrey)
    tankect ← Tank([
        echanneltank_origin[0];
        echanneltank_origin[1] - (N_Fi*W_ExitChannel) - (N_Fi*2*T_PlantWall);
        echanneltank_origin[2]
    ], [echanneltank_dim[0]; W_ExitChannel; echanneltank_dim[2]], T_PlantWall)
    layerset ← layer_set("0")
    layerfreezeect ← layer_freeze("echanneltank")
    one ← stack(layernewect, tankect, layerset, layerfreezeect)
    return one
# ***Drawn for reference***
FilterInletBoxscript :=
    layernewfib ← layer_new("SRSF inlet box", ltgrey)
    tankfib ← Tank(FilterInletTank_origin, [echanneltank_dim[0]; W_ExitChannel; echanneltank_dim[2]], T_PlantWall)
    tankfib2 ← Tank([
        FilterInletTank_origin[0];
        FilterInletTank_origin[1] - W_ExitChannel - 2*T_PlantWall;
        FilterInletTank_origin[2]
    ], [echanneltank_dim[0]; W_ExitChannel; echanneltank_dim[2]], T_PlantWall)
    layerset ← layer_set("0")
    layerfreezefib ← layer_freeze("SRSF inlet box")
    one ← stack(layernewfib, tankfib, tankfib2, layerset, layerfreezefib)
    return one
W_ExitChannel = 0.373167 m
FilterOutletBoxscript :=
    layernewfob ← layer_new("SRSF outlet box", ltgrey)
    tankfob ← Tank([
        FilterInletTank_origin[0] - 3*W_ExitChannel - 6*T_PlantWall - S_Walkway;
        FilterInletTank_origin[1];
        FilterInletTank_origin[2] - 2*Headloss
    ], [echanneltank_dim[0]; W_ExitChannel; echanneltank_dim[2]], T_PlantWall)
    tankfob2 ← Tank([
        FilterInletTank_origin[0] - 3*W_ExitChannel - 6*T_PlantWall - S_Walkway;
        FilterInletTank_origin[1] - W_ExitChannel - 2*T_PlantWall;
        FilterInletTank_origin[2] - 2*Headloss
    ], [echanneltank_dim[0]; W_ExitChannel; echanneltank_dim[2]], T_PlantWall)
    layerset ← layer_set("0")
    layerfreezefob ← layer_freeze("SRSF outlet box")
    one ← stack(layernewfob, tankfob, tankfob2, layerset, layerfreezefob)
    return one
Filterexitchannelscript :=
    layer2 ← layer_new("SRSF outlet box", ltgrey)
    channel1 ← ChannelDrawing([
        FilterInletTank_origin[0] - (S_Walkway + 4*W_ExitChannel + 6*T_PlantWall);
        0;
        FilterInletTank_origin[2]
    ], [((N_Fi*2*T_PlantWall) + ((N_Fi + 1)*W_ExitChannel)) + 2*T_PlantWall; W_ExitChannel; H_ExitChannel], T_ChannelWall)
    rotate1 ← rotate([
        FilterInletTank_origin[0] - (S_Walkway + 4*W_ExitChannel + 6*T_PlantWall);
        0;
        FilterInletTank_origin[2]
    ], 270)
    bigunion ← union_allA
    layerset ← layer_set("0")
    layerfreeze2 ← layer_freeze("echannel2")
    one ← stack(layer2, channel1, rotate1, bigunion, layerset, layerfreeze2)
    return ← one
H_BwChannel := 1 m  # arbitrary variable; will change when HL through siphon is determined.
fibackwashchannelscript :=
    layernewfob ← layer_new("SRSF backwash channel", ltgrey)
    tankbw ← Tank([
        FilterInletTank_origin[0] - 2*W_ExitChannel - 4*T_PlantWall;
        FilterInletTank_origin[1];
        FilterInletTank_origin[2] - H_BwChannel
    ], [echanneltank_dim[0]; W_ExitChannel; echanneltank_dim[2]], T_PlantWall)
    tankbw2 ← Tank([
        FilterInletTank_origin[0] - 2*W_ExitChannel - 4*T_PlantWall;
        FilterInletTank_origin[1] - W_ExitChannel - 2*T_PlantWall;
        FilterInletTank_origin[2] - H_BwChannel
    ], [echanneltank_dim[0]; W_ExitChannel; echanneltank_dim[2]], T_PlantWall)
    layerset ← layer_set("0")
    layerfreezefob ← layer_freeze("SRSF backwash channel")
    one ← stack(layernewfob, tankbw, tankbw2, layerset, layerfreezefob)
    return one
fibackwashchannelscript2 :=
    layer2 ← layer_new("SRSF backwash channel", ltgrey)
    channel1 ← ChannelDrawing([
        FilterInletTank_origin[0] - (3*W_ExitChannel + 4*T_PlantWall);
        0;
        FilterInletTank_origin[2] - H_BwChannel
    ], [((N_Fi*2*T_PlantWall) + ((N_Fi + 1)*W_ExitChannel)) + 2*T_PlantWall; W_ExitChannel; H_ExitChannel], T_ChannelWall)
    rotate1 ← rotate([
        FilterInletTank_origin[0] - (3*W_ExitChannel + 4*T_PlantWall);
        0;
        FilterInletTank_origin[2] - H_BwChannel
    ], 270)
    bigunion ← union_allA
    layerset ← layer_set("0")
    layerfreeze2 ← layer_freeze("SRSF backwash channel")
    one ← stack(layer2, channel1, rotate1, bigunion, layerset, layerfreeze2)
    return ← one
filterscript :=
    layernewfilt ← layer_new("SRSF", ltgrey)
    tankfilt ← Tank([
        FilterInletTank_origin[0] - W_ExitChannel - 2*T_PlantWall;
        FilterInletTank_origin[1];
        FilterInletTank_origin[2] - H_Sed
    ], [echanneltank_dim[0]; W_ExitChannel; echanneltank_dim[2] + H_Sed], T_PlantWall)
    tankfilt2 ← Tank([
        FilterInletTank_origin[0] - W_ExitChannel - 2*T_PlantWall;
        FilterInletTank_origin[1] - W_ExitChannel - 2*T_PlantWall;
        FilterInletTank_origin[2] - H_Sed
    ], [echanneltank_dim[0]; W_ExitChannel; echanneltank_dim[2] + H_Sed], T_PlantWall)
    layerset ← layer_set("0")
    layerfreezefilt ← layer_freeze("SRSF")
    one ← stack(layernewfilt, tankfilt, tankfilt2, layerset, layerfreezefilt)
    return one
AC_Filter := stack(Filterinletchannelscript, sedechanneltankscript, Filterexitchannelscript, fibackwashchannelscript, filterscript)
# [component: inputs AC_Filter]
