# [reference: MasterProgram.xmcd]
# [reference: SRSF jcw57.xmcd]
FilterInletTank_origin := [
    Plant_Origin[0];
    Plant_Origin[1] - T_PlantWall - W_ExitChannel;
    Plant_Origin[2] + H_Sed - H_ExitChannel
] = [0; -0.523167; 1.38183] m
FiEntranceBox_dim := [L_FiEntrance; W_FiEntrance; H_FiEntrance]
FiEntranceBox_origin := [
    Plant_Origin[0] - W_ExitChannel - T_PlantWall;
    Plant_Origin[1] - W_FiEntrance - T_PlantWall;
    Z_FiEntranceBottom
]
FiExitBox_dim := [L_FiExit; W_FiExit; H_FiExit]
FiExitBox_origin := [
    Plant_Origin[0] - W_ExitChannel - 2*T_PlantWall - L_FiEntrance;
    Plant_Origin[1] - W_FiExit - T_PlantWall;
    Z_FiExitBottom
]
Fi_origin := [
    Plant_Origin[0] - W_ExitChannel - 4*T_PlantWall - L_FiEntrance - L_FiExit - W_MpWalkway;
    Plant_Origin[1] - W_Fi - 1.5*T_PlantWall - OuterDiameterFittingPVC(ND_FiBwTrunk) - 1.5*T_ConcreteMin;
    Z_FiBottom
]
Fi_dim := [L_Fi; W_Fi + OuterDiameterFittingPVC(ND_FiBwTrunk) + 1.5*T_ConcreteMin + .5*T_PlantWall; H_Fi] = [1.1; 1.37827; 3.67456] m
FiEnclosureTank_origin := [Plant_Origin[0] - W_ExitChannel - 2*T_PlantWall; Plant_Origin[1] - 2*W_Fi; 0]
Z_FiEntranceBottom + SocketDepth(ND_FiBwTrunk) = 0.899617 m
FiBwInletCoupling_origin := [
    Plant_Origin[0] - W_ExitChannel - T_PlantWall - 0.5*ND_FiBwTrunk - T_ConcreteMin;
    Plant_Origin[1] - T_PlantWall - 0.5*ND_FiBwTrunk - T_ConcreteMin;
    Z_FiEntranceBottom - CouplingLength(ND_FiBwTrunk) + SocketDepth(ND_FiBwTrunk)
] = [-0.674767; -0.3016; 0.690067] m
T_PlantWall = 0.15 m
FiInletCoupling1_origin := [
    Plant_Origin[0] - W_ExitChannel - T_PlantWall - L_FiEntrance + (0.5*ND_FiTrunk) + T_ConcreteMin;
    Plant_Origin[1] - T_PlantWall - 0.5*ND_FiTrunk - T_ConcreteMin;
    Z_FiEntranceBottom - CouplingLength(ND_FiTrunk) + SocketDepth(ND_FiTrunk)
]
FiInletCoupling2_origin := [
    Plant_Origin[0] - W_ExitChannel - T_PlantWall - 0.5*ND_FiBwTrunk - T_ConcreteMin;
    Plant_Origin[1] - T_PlantWall - 2.5*ND_FiBwTrunk - T_ConcreteMin;
    Z_FiEntranceBottom - CouplingLength(ND_FiTrunk) + SocketDepth(ND_FiTrunk)
]
Z_FiExitBottom = 0.835617 m
FiInletCoupling3_origin := [
    Plant_Origin[0] - W_ExitChannel - T_PlantWall - L_FiEntrance + (0.5*ND_FiTrunk) + T_ConcreteMin;
    Plant_Origin[1] - T_PlantWall - 2.5*ND_FiBwTrunk - T_ConcreteMin;
    Z_FiEntranceBottom - CouplingLength(ND_FiTrunk) + SocketDepth(ND_FiTrunk)
]
Z_FiEntrance
FiExitCoupling0_origin := [
    Plant_Origin[0] - W_ExitChannel - 2*T_PlantWall - 0.5*ND_FiTrunk - T_ConcreteMin - L_FiEntrance;
    Plant_Origin[1] - T_PlantWall - 0.5*ND_FiTrunk - T_ConcreteMin;
    Z_FiExitBottom - CouplingLength(ND_FiTrunk) + SocketDepth(ND_FiTrunk)
]
FiExitCoupling1_origin := [
    Plant_Origin[0] - W_ExitChannel - 2*T_PlantWall - 2*L_FiEntrance + (0.5*ND_FiTrunk) + T_ConcreteMin;
    Plant_Origin[1] - T_PlantWall - 0.5*ND_FiTrunk - T_ConcreteMin;
    Z_FiExitBottom - CouplingLength(ND_FiTrunk) + SocketDepth(ND_FiTrunk)
]
FiExitCoupling2_origin := [
    Plant_Origin[0] - W_ExitChannel - 2*T_PlantWall - 0.5*ND_FiBwTrunk - T_ConcreteMin - L_FiEntrance;
    Plant_Origin[1] - T_PlantWall - W_FiExit + T_ConcreteMin + 0.5*ND_FiTrunk;
    Z_FiExitBottom - CouplingLength(ND_FiTrunk) + SocketDepth(ND_FiTrunk)
]
FiExitCoupling3_origin := [
    Plant_Origin[0] - W_ExitChannel - 2*T_PlantWall - 2*L_FiEntrance + (0.5*ND_FiTrunk) + T_ConcreteMin;
    Plant_Origin[1] - T_PlantWall - W_FiExit + T_ConcreteMin + 0.5*ND_FiTrunk;
    Z_FiExitBottom - CouplingLength(ND_FiTrunk) + SocketDepth(ND_FiTrunk)
]
FiEntranceWeir_origin := [Plant_Origin[0] - W_ExitChannel; Plant_Origin[1] - W_FiEntrance - T_PlantWall; Z_FiEntranceWeir]
Filterinletchannelscript :=
    layer2 ← layer_new("FilterInletChannel", ltgrey)
    channel1 ← ChannelDrawing([Plant_Origin[0] - W_ExitChannel; 0; Plant_Origin[2] + H_Sed - H_ExitChannel], [W_FiEntrance + W_FiExit + W_FiOverflow + 4*T_PlantWall; W_ExitChannel; H_ExitChannel], T_ChannelWall)
    rotate1 ← rotate([Plant_Origin[0] - W_ExitChannel; 0; Plant_Origin[2] + H_Sed - H_ExitChannel], 270)
    box ← BoxF([
        Plant_Origin[0];
        Plant_Origin[1] - W_FiEntrance - W_FiExit - W_FiOverflow - 4*T_PlantWall;
        Plant_Origin[2] + H_Sed - H_ExitChannel
    ], [
        Plant_Origin[0] - W_ExitChannel;
        Plant_Origin[1] - W_FiEntrance - W_FiExit - W_FiOverflow - 3*T_PlantWall;
        Plant_Origin[2] + H_Sed
    ], [0; 0; 0]*deg)
    group ← FreezeLayer("FilterInletChannel")
    entweir ← BoxF([
        FiEntranceWeir_origin[0];
        Plant_Origin[1] - T_PlantWall - W_FiEntrance + SF_Fi;
        FiEntranceWeir_origin[2]
    ], [
        FiEntranceWeir_origin[0] - T_PlantWall;
        Plant_Origin[1] - T_PlantWall - SF_Fi;
        Plant_Origin[2] + H_Sed
    ], [0; 0; 0]*deg)
    entweir2 ← BoxF([
        FiEntranceWeir_origin[0];
        Plant_Origin[1] - (3*T_PlantWall) - (2*W_FiEntrance) - W_FiOverflow + SF_Fi;
        FiEntranceWeir_origin[2]
    ], [
        FiEntranceWeir_origin[0] - T_PlantWall;
        Plant_Origin[1] - (3*T_PlantWall) - W_FiEntrance - W_FiOverflow - SF_Fi;
        Plant_Origin[2] + H_Sed
    ], [0; 0; 0]*deg)
    group2 ← GroupAll("DeleteMe")
    subtractw ← SubtractF(["FilterInletChannel"], "DeleteMe")
    bigunion ← union_allA
    layerfreeze2 ← layer_freeze("FilterInletChannel")
    one ← stack(layer2, channel1, rotate1, box, group, entweir, entweir2, group2, subtractw, bigunion, layerfreeze2)
    return ← one
Fibwdrainchannelscript :=
    layer2 ← layer_new("FilterBWDrainChannel", ltgrey)
    bwbox ← stack(Tank([Fi_origin[0] + T_PlantWall + L_FiBw; FiExitBox_origin[1] - 2*T_PlantWall - W_FiBw/2; Z_FiBwBottom], [L_FiBw; W_FiBw; H_FiBw], T_PlantWall), "")
    bwdrainbox ← stack(Tank([
        Fi_origin[0] + 2*T_PlantWall + L_FiBw + L_FiBwWeirDrain;
        FiExitBox_origin[1] - 2*T_PlantWall - W_FiBwWeirDrain/2;
        Z_FiBwWeirDrainBottom
    ], [L_FiBwWeirDrain; W_FiBwWeirDrain; H_FiBwWeirDrain], T_PlantWall), "")
    ioverflowtank ← Tank([FiEntranceBox_origin[0]; FiEntranceBox_origin[1] - T_PlantWall - W_FiOverflow; Z_FiOverflowBottom], [L_FiOverflow; W_FiOverflow; H_FiOverflow], T_PlantWall)
    eoverflowtank ← Tank([FiExitBox_origin[0]; FiEntranceBox_origin[1] - T_PlantWall - W_FiOverflow; Z_FiOverflowBottom], [L_FiOverflow; W_FiOverflow; H_FiExit], T_PlantWall)
    connectbox ← BoxF([
        FiExitBox_origin[0] - T_PlantWall;
        FiExitBox_origin[1] - T_PlantWall - W_FiOverflow;
        FiExitBox_origin[2]
    ], [FiExitBox_origin[0]; FiExitBox_origin[1] - T_PlantWall; FiExitBox_origin[2] + H_FiEntrance], [0; 0; 0]*deg)
    channel1 ← ChannelDrawing([
        Fi_origin[0] + T_PlantWall + L_FiBw/2 - outerdiameter(ND_DistPipe)/2 - 5 cm;
        FiExitBox_origin[1] - (2*T_PlantWall) - W_FiBwDrain/2;
        Z_FiBwBottom - H_FiBwDrain - T_PlantWall
    ], [
        L_FiEntrance + W_ExitChannel + 4*T_PlantWall + L_FiExit + W_MpWalkway - outerdiameter(ND_DistPipe)/2 - 5 cm;
        W_FiBwDrain;
        H_FiBwDrain
    ], T_ChannelWall)
    group ← FreezeLayer("FilterBWDrainChannel")
    layernewcouplings ← layer_new("couplings", green)
    overflowcoupling ← CouplingSUBF([
        FiExitBox_origin[0] + (T_PlantWall + CouplingLength(ND_DistPipe))/2 - SocketDepth(ND_DistPipe);
        FiExitBox_origin[1] - T_PlantWall - W_FiOverflow/2;
        Z_FiOverflowBottom + T_ConcreteMin + 0.5*ND_DistPipe
    ], [0; 0]*deg, ND_DistPipe, EN_PipeSpec, ["FilterBWDrainChannel"])
    eoverflowcoupling ← CouplingSUBF([
        FiExitBox_origin[0] - L_FiExit + T_ConcreteMin + 0.5*ND_DistPipe;
        FiExitBox_origin[1] - T_PlantWall - W_FiOverflow/2;
        Z_FiOverflowBottom - CouplingLength(ND_DistPipe) + SocketDepth(ND_DistPipe)
    ], [0; 90]*deg, ND_DistPipe, EN_PipeSpec, ["FilterBWDrainChannel"])
    ioverflowcoupling ← CouplingSUBF([
        FiEntranceBox_origin[0] - T_ConcreteMin - 0.5*ND_DistPipe;
        FiExitBox_origin[1] - T_PlantWall - W_FiOverflow/2;
        Z_FiOverflowBottom - CouplingLength(ND_DistPipe) + SocketDepth(ND_DistPipe)
    ], [0; 90]*deg, ND_FiEntranceOverflow, EN_PipeSpec, ["FilterBWDrainChannel"])
    bwdraincoupling ← CouplingSUBF([
        Fi_origin[0] + 2*T_PlantWall + L_FiBw + L_FiBwWeirDrain/2;
        FiExitBox_origin[1] - 2*T_PlantWall;
        Z_FiBwWeirDrainBottom - CouplingLength(ND_DistPipe) + SocketDepth(ND_DistPipe)
    ], [0; 90]*deg, ND_FiBwDrain, EN_PipeSpec, ["FilterBWDrainChannel"])
    bwcoupling ← CouplingSUBF([
        Fi_origin[0] + T_PlantWall + L_FiBw/2;
        FiExitBox_origin[1] - 2*T_PlantWall;
        Z_FiBwBottom - CouplingLength(ND_DistPipe) + SocketDepth(ND_DistPipe)
    ], [0; 90]*deg, ND_FiBwWeirDrain, EN_PipeSpec, ["FilterBWDrainChannel"])
    layerset ← layer_set("0")
    layerfreezecoup ← layer_freeze("couplings")
    bigunion ← union_allA
    layerfreeze2 ← layer_freeze("FilterBWDrainChannel")
    one ← stack(layer2, bwbox, bwdrainbox, ioverflowtank, eoverflowtank, channel1, group, layernewcouplings, overflowcoupling, eoverflowcoupling, ioverflowcoupling, bwdraincoupling, bwcoupling, layerset, layerfreezecoup, bigunion, layerfreeze2)
    return ← one
Fiscript :=
    layernewfilt ← layer_new("SRSF filters", ltgrey)
    tankfilt ← Tank(Fi_origin, Fi_dim, T_PlantWall)
    tankfilt2 ← Tank([Fi_origin[0]; FiEntranceBox_origin[1] - W_FiEntrance - 2*T_PlantWall - W_FiOverflow; Fi_origin[2]], Fi_dim, T_PlantWall)
    addbox ← BoxF([
        Fi_origin[0] + T_PlantWall;
        FiEntranceBox_origin[1] - W_FiEntrance - 3*T_PlantWall - W_FiOverflow;
        Fi_origin[2] - T_PlantWall
    ], [Fi_origin[0] - Fi_dim[0] - T_PlantWall; Fi_origin[1] + Fi_dim[1] + T_PlantWall; Fi_origin[2]], [0; 0; 0]*deg)
    group ← FreezeLayer("SRSF filters")
    layernewcouplings ← layer_new("filtcouplings", green)
    bwcoupling1 ← CouplingSUBF([
        Fi_origin[0] + CouplingLength(ND_FiBwTrunk) - SocketDepth(ND_FiBwTrunk);
        FiBwInletCoupling_origin[1];
        Fi_origin[2] + outerdiameter(ND_FiBwManBranch)/2
    ], [0; 0]*deg, ND_FiBwTrunk, EN_PipeSpec, ["SRSF filters"])
    coupling12 ← CouplingSUBF([
        Fi_origin[0] + CouplingLength(ND_FiTrunk) - SocketDepth(ND_FiTrunk);
        FiBwInletCoupling_origin[1];
        Fi_origin[2] + outerdiameter(ND_FiBwManBranch)/2 + 20 cm
    ], [0; 0]*deg, ND_FiTrunk, EN_PipeSpec, ["SRSF filters"])
    coupling13 ← CouplingSUBF([
        Fi_origin[0] + CouplingLength(ND_FiTrunk) - SocketDepth(ND_FiTrunk);
        FiBwInletCoupling_origin[1];
        Fi_origin[2] + outerdiameter(ND_FiBwManBranch)/2 + 40 cm
    ], [0; 0]*deg, ND_FiTrunk, EN_PipeSpec, ["SRSF filters"])
    coupling14 ← CouplingSUBF([
        Fi_origin[0] + CouplingLength(ND_FiTrunk) - SocketDepth(ND_FiTrunk);
        FiBwInletCoupling_origin[1];
        Fi_origin[2] + outerdiameter(ND_FiBwManBranch)/2 + 60 cm
    ], [0; 0]*deg, ND_FiTrunk, EN_PipeSpec, ["SRSF filters"])
    coupling15 ← CouplingSUBF([
        Fi_origin[0] + CouplingLength(ND_FiTrunk) - SocketDepth(ND_FiTrunk);
        FiBwInletCoupling_origin[1];
        Fi_origin[2] + outerdiameter(ND_FiBwManBranch)/2 + 80 cm
    ], [0; 0]*deg, ND_FiTrunk, EN_PipeSpec, ["SRSF filters"])
    coupling16 ← CouplingSUBF([
        Fi_origin[0] + CouplingLength(ND_FiTrunk) - SocketDepth(ND_FiTrunk);
        FiBwInletCoupling_origin[1];
        Fi_origin[2] + outerdiameter(ND_FiBwManBranch)/2 + 100 cm
    ], [0; 0]*deg, ND_FiTrunk, EN_PipeSpec, ["SRSF filters"])
    coupling17 ← CouplingSUBF([
        Fi_origin[0] + CouplingLength(ND_FiTrunk) - SocketDepth(ND_FiTrunk);
        FiBwInletCoupling_origin[1];
        Fi_origin[2] + outerdiameter(ND_FiBwManBranch)/2 + 120 cm
    ], [0; 0]*deg, ND_FiTrunk, EN_PipeSpec, ["SRSF filters"])
    bwcoupling2 ← CouplingSUBF([
        Fi_origin[0] + CouplingLength(ND_FiBwTrunk) - SocketDepth(ND_FiBwTrunk);
        FiEntranceBox_origin[1] - W_FiEntrance - 2*T_PlantWall - W_FiOverflow + (0.5*ND_FiBwTrunk) + T_ConcreteMin;
        Fi_origin[2] + outerdiameter(ND_FiBwManBranch)/2
    ], [0; 0]*deg, ND_FiBwTrunk, EN_PipeSpec, ["SRSF filters"])
    coupling22 ← CouplingSUBF([
        Fi_origin[0] + CouplingLength(ND_FiTrunk) - SocketDepth(ND_FiTrunk);
        FiEntranceBox_origin[1] - W_FiEntrance - 2*T_PlantWall - W_FiOverflow + (0.5*ND_FiBwTrunk) + T_ConcreteMin;
        Fi_origin[2] + outerdiameter(ND_FiBwManBranch)/2 + 20 cm
    ], [0; 0]*deg, ND_FiTrunk, EN_PipeSpec, ["SRSF filters"])
    coupling23 ← CouplingSUBF([
        Fi_origin[0] + CouplingLength(ND_FiTrunk) - SocketDepth(ND_FiTrunk);
        FiEntranceBox_origin[1] - W_FiEntrance - 2*T_PlantWall - W_FiOverflow + (0.5*ND_FiBwTrunk) + T_ConcreteMin;
        Fi_origin[2] + outerdiameter(ND_FiBwManBranch)/2 + 40 cm
    ], [0; 0]*deg, ND_FiTrunk, EN_PipeSpec, ["SRSF filters"])
    coupling24 ← CouplingSUBF([
        Fi_origin[0] + CouplingLength(ND_FiTrunk) - SocketDepth(ND_FiTrunk);
        FiEntranceBox_origin[1] - W_FiEntrance - 2*T_PlantWall - W_FiOverflow + (0.5*ND_FiBwTrunk) + T_ConcreteMin;
        Fi_origin[2] + outerdiameter(ND_FiBwManBranch)/2 + 60 cm
    ], [0; 0]*deg, ND_FiTrunk, EN_PipeSpec, ["SRSF filters"])
    coupling25 ← CouplingSUBF([
        Fi_origin[0] + CouplingLength(ND_FiTrunk) - SocketDepth(ND_FiTrunk);
        FiEntranceBox_origin[1] - W_FiEntrance - 2*T_PlantWall - W_FiOverflow + (0.5*ND_FiBwTrunk) + T_ConcreteMin;
        Fi_origin[2] + outerdiameter(ND_FiBwManBranch)/2 + 80 cm
    ], [0; 0]*deg, ND_FiTrunk, EN_PipeSpec, ["SRSF filters"])
    coupling26 ← CouplingSUBF([
        Fi_origin[0] + CouplingLength(ND_FiTrunk) - SocketDepth(ND_FiTrunk);
        FiEntranceBox_origin[1] - W_FiEntrance - 2*T_PlantWall - W_FiOverflow + (0.5*ND_FiBwTrunk) + T_ConcreteMin;
        Fi_origin[2] + outerdiameter(ND_FiBwManBranch)/2 + 100 cm
    ], [0; 0]*deg, ND_FiTrunk, EN_PipeSpec, ["SRSF filters"])
    coupling27 ← CouplingSUBF([
        Fi_origin[0] + CouplingLength(ND_FiTrunk) - SocketDepth(ND_FiTrunk);
        FiEntranceBox_origin[1] - W_FiEntrance - 2*T_PlantWall - W_FiOverflow + (0.5*ND_FiBwTrunk) + T_ConcreteMin;
        Fi_origin[2] + outerdiameter(ND_FiBwManBranch)/2 + 120 cm
    ], [0; 0]*deg, ND_FiTrunk, EN_PipeSpec, ["SRSF filters"])
    siphonc1 ← CouplingSUBF([
        Fi_origin[0] + CouplingLength(ND_FiSiphon) - SocketDepth(ND_FiSiphon);
        Fi_origin[1] + T_ConcreteMin + OuterDiameterFittingPVC(ND_FiSiphon)/2;
        Z_FiSiphonCoupling
    ], [0; 0]*deg, ND_FiSiphon, EN_PipeSpec, ["SRSF filters"])
    siphonc2 ← CouplingSUBF([
        Fi_origin[0] + CouplingLength(ND_FiSiphon) - SocketDepth(ND_FiSiphon);
        Fi_origin[1] - T_ConcreteMin - OuterDiameterFittingPVC(ND_FiSiphon)/2 - T_PlantWall;
        Z_FiSiphonCoupling
    ], [0; 0]*deg, ND_FiSiphon, EN_PipeSpec, ["SRSF filters"])
    layerset ← layer_set("0")
    layerfreezeco ← layer_freeze("filtcouplings")
    layerman ← layer_new("filter manifolds", blue)
    man1 ← ManifoldF([
        Fi_origin[0] + SocketDepth(ND_FiBwTrunk);
        FiBwInletCoupling_origin[1];
        Fi_origin[2] + outerdiameter(ND_FiBwManBranch)/2
    ], L_Fi, [0; 0]*deg, ND_FiBwTrunk, EN_PipeSpec, N_FiManBranch, ND_FiManBranch)
    man2 ← ManifoldF([
        Fi_origin[0] + SocketDepth(ND_FiTrunk);
        FiBwInletCoupling_origin[1];
        Fi_origin[2] + outerdiameter(ND_FiBwManBranch)/2 + 20 cm
    ], L_Fi, [0; 0]*deg, ND_FiTrunk, EN_PipeSpec, N_FiManBranch, ND_FiManBranch)
    man3 ← ManifoldF([
        Fi_origin[0] + SocketDepth(ND_FiTrunk);
        FiBwInletCoupling_origin[1];
        Fi_origin[2] + outerdiameter(ND_FiBwManBranch)/2 + 40 cm
    ], L_Fi, [0; 0]*deg, ND_FiTrunk, EN_PipeSpec, N_FiManBranch, ND_FiManBranch)
    man4 ← ManifoldF([
        Fi_origin[0] + SocketDepth(ND_FiTrunk);
        FiBwInletCoupling_origin[1];
        Fi_origin[2] + outerdiameter(ND_FiBwManBranch)/2 + 60 cm
    ], L_Fi, [0; 0]*deg, ND_FiTrunk, EN_PipeSpec, N_FiManBranch, ND_FiManBranch)
    man5 ← ManifoldF([
        Fi_origin[0] + SocketDepth(ND_FiTrunk);
        FiBwInletCoupling_origin[1];
        Fi_origin[2] + outerdiameter(ND_FiBwManBranch)/2 + 80 cm
    ], L_Fi, [0; 0]*deg, ND_FiTrunk, EN_PipeSpec, N_FiManBranch, ND_FiManBranch)
    man6 ← ManifoldF([
        Fi_origin[0] + SocketDepth(ND_FiTrunk);
        FiBwInletCoupling_origin[1];
        Fi_origin[2] + outerdiameter(ND_FiBwManBranch)/2 + 100 cm
    ], L_Fi, [0; 0]*deg, ND_FiTrunk, EN_PipeSpec, N_FiManBranch, ND_FiManBranch)
    man7 ← ManifoldF([
        Fi_origin[0] + SocketDepth(ND_FiTrunk);
        FiBwInletCoupling_origin[1];
        Fi_origin[2] + outerdiameter(ND_FiBwManBranch)/2 + 120 cm
    ], L_Fi, [0; 0]*deg, ND_FiTrunk, EN_PipeSpec, N_FiManBranch, ND_FiManBranch)
    man11 ← ManifoldF([
        Fi_origin[0] + SocketDepth(ND_FiBwTrunk);
        FiEntranceBox_origin[1] - W_FiEntrance - 2*T_PlantWall - W_FiOverflow + (0.5*ND_FiBwTrunk) + T_ConcreteMin;
        Fi_origin[2] + outerdiameter(ND_FiBwManBranch)/2
    ], L_Fi, [0; 0]*deg, ND_FiBwTrunk, EN_PipeSpec, N_FiManBranch, ND_FiManBranch)
    man12 ← ManifoldF([
        Fi_origin[0] + SocketDepth(ND_FiTrunk);
        FiEntranceBox_origin[1] - W_FiEntrance - 2*T_PlantWall - W_FiOverflow + (0.5*ND_FiBwTrunk) + T_ConcreteMin;
        Fi_origin[2] + outerdiameter(ND_FiBwManBranch)/2 + 20 cm
    ], L_Fi, [0; 0]*deg, ND_FiTrunk, EN_PipeSpec, N_FiManBranch, ND_FiManBranch)
    man13 ← ManifoldF([
        Fi_origin[0] + SocketDepth(ND_FiTrunk);
        FiEntranceBox_origin[1] - W_FiEntrance - 2*T_PlantWall - W_FiOverflow + (0.5*ND_FiBwTrunk) + T_ConcreteMin;
        Fi_origin[2] + outerdiameter(ND_FiBwManBranch)/2 + 40 cm
    ], L_Fi, [0; 0]*deg, ND_FiTrunk, EN_PipeSpec, N_FiManBranch, ND_FiManBranch)
    man14 ← ManifoldF([
        Fi_origin[0] + SocketDepth(ND_FiTrunk);
        FiEntranceBox_origin[1] - W_FiEntrance - 2*T_PlantWall - W_FiOverflow + (0.5*ND_FiBwTrunk) + T_ConcreteMin;
        Fi_origin[2] + outerdiameter(ND_FiBwManBranch)/2 + 60 cm
    ], L_Fi, [0; 0]*deg, ND_FiTrunk, EN_PipeSpec, N_FiManBranch, ND_FiManBranch)
    man15 ← ManifoldF([
        Fi_origin[0] + SocketDepth(ND_FiTrunk);
        FiEntranceBox_origin[1] - W_FiEntrance - 2*T_PlantWall - W_FiOverflow + (0.5*ND_FiBwTrunk) + T_ConcreteMin;
        Fi_origin[2] + outerdiameter(ND_FiBwManBranch)/2 + 80 cm
    ], L_Fi, [0; 0]*deg, ND_FiTrunk, EN_PipeSpec, N_FiManBranch, ND_FiManBranch)
    man16 ← ManifoldF([
        Fi_origin[0] + SocketDepth(ND_FiTrunk);
        FiEntranceBox_origin[1] - W_FiEntrance - 2*T_PlantWall - W_FiOverflow + (0.5*ND_FiBwTrunk) + T_ConcreteMin;
        Fi_origin[2] + outerdiameter(ND_FiBwManBranch)/2 + 100 cm
    ], L_Fi, [0; 0]*deg, ND_FiTrunk, EN_PipeSpec, N_FiManBranch, ND_FiManBranch)
    man17 ← ManifoldF([
        Fi_origin[0] + SocketDepth(ND_FiTrunk);
        FiEntranceBox_origin[1] - W_FiEntrance - 2*T_PlantWall - W_FiOverflow + (0.5*ND_FiBwTrunk) + T_ConcreteMin;
        Fi_origin[2] + outerdiameter(ND_FiBwManBranch)/2 + 120 cm
    ], L_Fi, [0; 0]*deg, ND_FiTrunk, EN_PipeSpec, N_FiManBranch, ND_FiManBranch)
    rotateman ← RotateGroup("filter manifold", "y", [FiBwInletCoupling_origin[1]], 90)
    layersetman ← layer_set("0")
    layerfrman ← layer_freeze("filter manifolds")
    layernewpipe ← layer_new("pipes", blue)
    bwpipe ← PipeF([
        Fi_origin[0] + CouplingLength(ND_FiBwTrunk) - SocketDepth(ND_FiBwTrunk);
        FiBwInletCoupling_origin[1];
        Fi_origin[2] + outerdiameter(ND_FiBwManBranch)/2
    ], W_MpWalkway + 2*T_PlantWall + L_FiExit + L_FiEntrance - T_ConcreteMin - ND_FiBwTrunk/2 - ElbowRadius(ND_FiBwTrunk), [0; 180]*deg, ND_FiBwTrunk, EN_PipeSpec)
    bwpipe2 ← PipeF([
        Fi_origin[0] + CouplingLength(ND_FiBwTrunk) - SocketDepth(ND_FiBwTrunk);
        FiEntranceBox_origin[1] - W_FiEntrance - 2*T_PlantWall - W_FiOverflow + (0.5*ND_FiBwTrunk) + T_ConcreteMin;
        Fi_origin[2] + outerdiameter(ND_FiBwManBranch)/2
    ], W_MpWalkway + 2*T_PlantWall + L_FiExit + L_FiEntrance - T_ConcreteMin - ND_FiBwTrunk/2 - ElbowRadius(ND_FiBwTrunk), [0; 180]*deg, ND_FiBwTrunk, EN_PipeSpec)
    pipe2 ← PipeF([
        Fi_origin[0] + CouplingLength(ND_FiBwTrunk) - SocketDepth(ND_FiBwTrunk);
        FiBwInletCoupling_origin[1];
        Fi_origin[2] + outerdiameter(ND_FiBwManBranch)/2 + 20 cm
    ], W_MpWalkway + T_PlantWall + T_ConcreteMin + ND_FiTrunk/2 - ElbowRadius(ND_FiTrunk), [0; 180]*deg, ND_FiTrunk, EN_PipeSpec)
    pipe3 ← PipeF([
        Fi_origin[0] + CouplingLength(ND_FiBwTrunk) - SocketDepth(ND_FiBwTrunk);
        FiBwInletCoupling_origin[1];
        Fi_origin[2] + outerdiameter(ND_FiBwManBranch)/2 + 40 cm
    ], W_MpWalkway + 2*T_PlantWall + L_FiExit + T_ConcreteMin + ND_FiTrunk/2 - ElbowRadius(ND_FiTrunk), [0; 180]*deg, ND_FiTrunk, EN_PipeSpec)
    pipe4 ← PipeF([
        Fi_origin[0] + CouplingLength(ND_FiBwTrunk) - SocketDepth(ND_FiBwTrunk);
        FiBwInletCoupling_origin[1];
        Fi_origin[2] + outerdiameter(ND_FiBwManBranch)/2 + 60 cm
    ], W_MpWalkway + T_PlantWall + L_FiExit - T_ConcreteMin - ND_FiTrunk/2 - ElbowRadius(ND_FiTrunk), [0; 180]*deg, ND_FiTrunk, EN_PipeSpec)
    pipe5 ← PipeF([
        Fi_origin[0] + CouplingLength(ND_FiBwTrunk) - SocketDepth(ND_FiBwTrunk);
        FiBwInletCoupling_origin[1];
        Fi_origin[2] + outerdiameter(ND_FiBwManBranch)/2 + 80 cm
    ], W_MpWalkway + T_PlantWall + T_ConcreteMin + ND_FiTrunk/2 - ElbowRadius(ND_FiTrunk), [0; 180]*deg, ND_FiTrunk, EN_PipeSpec)
    pipe6 ← PipeF([
        Fi_origin[0] + CouplingLength(ND_FiBwTrunk) - SocketDepth(ND_FiBwTrunk);
        FiBwInletCoupling_origin[1];
        Fi_origin[2] + outerdiameter(ND_FiBwManBranch)/2 + 100 cm
    ], W_MpWalkway + T_PlantWall + T_ConcreteMin + ND_FiTrunk/2 - ElbowRadius(ND_FiTrunk), [0; 180]*deg, ND_FiTrunk, EN_PipeSpec)
    pipe7 ← PipeF([
        Fi_origin[0] + CouplingLength(ND_FiBwTrunk) - SocketDepth(ND_FiBwTrunk);
        FiBwInletCoupling_origin[1];
        Fi_origin[2] + outerdiameter(ND_FiBwManBranch)/2 + 120 cm
    ], 50 cm, [0; 180]*deg, ND_FiTrunk, EN_PipeSpec)
    pipe22 ← PipeF([
        Fi_origin[0] + CouplingLength(ND_FiBwTrunk) - SocketDepth(ND_FiBwTrunk);
        FiEntranceBox_origin[1] - W_FiEntrance - 2*T_PlantWall - W_FiOverflow + (0.5*ND_FiBwTrunk) + T_ConcreteMin;
        Fi_origin[2] + outerdiameter(ND_FiBwManBranch)/2 + 20 cm
    ], W_MpWalkway + T_PlantWall + T_ConcreteMin + ND_FiTrunk/2 - ElbowRadius(ND_FiTrunk), [0; 180]*deg, ND_FiTrunk, EN_PipeSpec)
    pipe32 ← PipeF([
        Fi_origin[0] + CouplingLength(ND_FiBwTrunk) - SocketDepth(ND_FiBwTrunk);
        FiEntranceBox_origin[1] - W_FiEntrance - 2*T_PlantWall - W_FiOverflow + (0.5*ND_FiBwTrunk) + T_ConcreteMin;
        Fi_origin[2] + outerdiameter(ND_FiBwManBranch)/2 + 40 cm
    ], W_MpWalkway + 2*T_PlantWall + L_FiExit + T_ConcreteMin + ND_FiTrunk/2 - ElbowRadius(ND_FiTrunk), [0; 180]*deg, ND_FiTrunk, EN_PipeSpec)
    pipe42 ← PipeF([
        Fi_origin[0] + CouplingLength(ND_FiBwTrunk) - SocketDepth(ND_FiBwTrunk);
        FiEntranceBox_origin[1] - W_FiEntrance - 2*T_PlantWall - W_FiOverflow + (0.5*ND_FiBwTrunk) + T_ConcreteMin;
        Fi_origin[2] + outerdiameter(ND_FiBwManBranch)/2 + 60 cm
    ], W_MpWalkway + T_PlantWall + L_FiExit - T_ConcreteMin - ND_FiTrunk/2 - ElbowRadius(ND_FiTrunk), [0; 180]*deg, ND_FiTrunk, EN_PipeSpec)
    pipe52 ← PipeF([
        Fi_origin[0] + CouplingLength(ND_FiBwTrunk) - SocketDepth(ND_FiBwTrunk);
        FiEntranceBox_origin[1] - W_FiEntrance - 2*T_PlantWall - W_FiOverflow + (0.5*ND_FiBwTrunk) + T_ConcreteMin;
        Fi_origin[2] + outerdiameter(ND_FiBwManBranch)/2 + 80 cm
    ], W_MpWalkway + T_PlantWall + T_ConcreteMin + ND_FiTrunk/2 - ElbowRadius(ND_FiTrunk), [0; 180]*deg, ND_FiTrunk, EN_PipeSpec)
    pipe62 ← PipeF([
        Fi_origin[0] + CouplingLength(ND_FiBwTrunk) - SocketDepth(ND_FiBwTrunk);
        FiEntranceBox_origin[1] - W_FiEntrance - 2*T_PlantWall - W_FiOverflow + (0.5*ND_FiBwTrunk) + T_ConcreteMin;
        Fi_origin[2] + outerdiameter(ND_FiBwManBranch)/2 + 100 cm
    ], W_MpWalkway + T_PlantWall + T_ConcreteMin + ND_FiTrunk/2 - ElbowRadius(ND_FiTrunk), [0; 180]*deg, ND_FiTrunk, EN_PipeSpec)
    pipe72 ← PipeF([
        Fi_origin[0] + CouplingLength(ND_FiBwTrunk) - SocketDepth(ND_FiBwTrunk);
        FiEntranceBox_origin[1] - W_FiEntrance - 2*T_PlantWall - W_FiOverflow + (0.5*ND_FiBwTrunk) + T_ConcreteMin;
        Fi_origin[2] + outerdiameter(ND_FiBwManBranch)/2 + 120 cm
    ], 50 cm, [0; 180]*deg, ND_FiTrunk, EN_PipeSpec)
    spipe1 ← PipeF([
        Fi_origin[0] + CouplingLength(ND_FiSiphon) - SocketDepth(ND_FiSiphon);
        Fi_origin[1] + T_ConcreteMin + OuterDiameterFittingPVC(ND_FiSiphon)/2;
        Z_FiSiphonCoupling
    ], 2*SocketDepth(ND_FiSiphon), [0; 180]*deg, ND_FiSiphon, EN_PipeSpec)
    selbow1 ← ElbowF([
        Fi_origin[0] + CouplingLength(ND_FiSiphon) + ElbowRadius(ND_FiSiphon) + SocketDepth(ND_FiSiphon);
        Fi_origin[1] + T_ConcreteMin + OuterDiameterFittingPVC(ND_FiSiphon)/2;
        Z_FiSiphonCoupling - ElbowRadius(ND_FiSiphon)
    ], [0; 0; 90]*deg, ND_FiSiphon, EN_PipeSpec)
    spipe12 ← PipeF([
        Fi_origin[0] + CouplingLength(ND_FiSiphon) + ElbowRadius(ND_FiSiphon) + SocketDepth(ND_FiSiphon);
        Fi_origin[1] + T_ConcreteMin + OuterDiameterFittingPVC(ND_FiSiphon)/2;
        Z_FiSiphonCoupling - ElbowRadius(ND_FiSiphon)
    ], Z_FiBwBottom - ND_FiSiphon, [0; 90]*deg, ND_FiSiphon, EN_PipeSpec)
    spipe2 ← PipeF([
        Fi_origin[0] + CouplingLength(ND_FiSiphon) - SocketDepth(ND_FiSiphon);
        Fi_origin[1] - T_ConcreteMin - OuterDiameterFittingPVC(ND_FiSiphon)/2 - T_PlantWall;
        Z_FiSiphonCoupling
    ], 2*SocketDepth(ND_FiSiphon), [0; 180]*deg, ND_FiSiphon, EN_PipeSpec)
    selbow2 ← ElbowF([
        Fi_origin[0] + CouplingLength(ND_FiSiphon) + ElbowRadius(ND_FiSiphon) + SocketDepth(ND_FiSiphon);
        Fi_origin[1] - T_ConcreteMin - OuterDiameterFittingPVC(ND_FiSiphon)/2 - T_PlantWall;
        Z_FiSiphonCoupling - ElbowRadius(ND_FiSiphon)
    ], [0; 0; 90]*deg, ND_FiSiphon, EN_PipeSpec)
    spipe22 ← PipeF([
        Fi_origin[0] + CouplingLength(ND_FiSiphon) + ElbowRadius(ND_FiSiphon) + SocketDepth(ND_FiSiphon);
        Fi_origin[1] - T_ConcreteMin - OuterDiameterFittingPVC(ND_FiSiphon)/2 - T_PlantWall;
        Z_FiSiphonCoupling - ElbowRadius(ND_FiSiphon)
    ], Z_FiBwBottom - ND_FiSiphon, [0; 90]*deg, ND_FiSiphon, EN_PipeSpec)
    dpipe ← PipeF([
        Fi_origin[0] + 2*T_PlantWall + L_FiBw + L_FiBwWeirDrain/2;
        FiExitBox_origin[1] - 2*T_PlantWall;
        Z_FiBwWeirDrainBottom - CouplingLength(ND_DistPipe) + SocketDepth(ND_DistPipe)
    ], H_FiBw - H_FiBwWeirDrain, [0; 270]*deg, ND_FiBwDrain, EN_PipeSpec)
    layersetpipe ← layer_set("0")
    layerfreezepipe ← layer_freeze("pipes")
    bigunion ← union_allA
    layerfreezefilt ← layer_freeze("SRSF filters")
    one ← stack(layernewfilt, tankfilt, tankfilt2, addbox, group, layernewcouplings, bwcoupling1, coupling12, coupling13, coupling14, coupling15, coupling16, coupling17, bwcoupling2, coupling22, coupling23, coupling24, coupling25, coupling26, coupling27, siphonc1, siphonc2, layerset, layerfreezeco, layerman, man1, man2, man3, man4, man5, man6, man7, man11, man12, man13, man14, man15, man16, man17, layersetman, layerfrman)
    two ← stack(one, layernewpipe, bwpipe, bwpipe2, pipe2, pipe3, pipe4, pipe5, pipe6, pipe7, pipe22, pipe32, pipe42, pipe52, pipe62, pipe72, spipe1, selbow1, spipe12, spipe2, selbow2, spipe22, dpipe, layersetpipe, layerfreezepipe, bigunion, layerfreezefilt)
    return two
Ficontrolboxscript :=
    layernewfilt ← layer_new("SRSFcontrolboxes", ltgrey)
    tankbw ← Tank(FiExitBox_origin, FiExitBox_dim, T_PlantWall)
    tankbw2 ← Tank([
        FiExitBox_origin[0];
        FiExitBox_origin[1] - W_FiExit - 2*T_PlantWall - W_FiOverflow;
        FiExitBox_origin[2]
    ], FiExitBox_dim, T_PlantWall)
    tankfilt ← Tank(FiEntranceBox_origin, FiEntranceBox_dim, T_PlantWall)
    tankfilt2 ← Tank([
        FiEntranceBox_origin[0];
        FiEntranceBox_origin[1] - W_FiEntrance - 2*T_PlantWall - W_FiOverflow;
        FiEntranceBox_origin[2]
    ], FiEntranceBox_dim, T_PlantWall)
    group ← FreezeLayer("SRSFcontrolboxes")
    entweir ← BoxF([FiEntranceBox_origin[0]; FiEntranceBox_origin[1] - T_PlantWall; FiEntranceWeir_origin[2]], [
        FiEntranceBox_origin[0] - L_FiWeir;
        FiEntranceBox_origin[1];
        FiEntranceBox_origin[2] + H_FiEntrance
    ], [0; 0; 0]*deg)
    entweir2 ← BoxF([
        FiEntranceBox_origin[0];
        FiEntranceBox_origin[1] - (2*T_PlantWall) - W_FiOverflow;
        FiEntranceWeir_origin[2]
    ], [
        FiEntranceBox_origin[0] - L_FiWeir;
        FiEntranceBox_origin[1] - T_PlantWall - W_FiOverflow;
        FiEntranceBox_origin[2] + H_FiEntrance
    ], [0; 0; 0]*deg)
    exitweir ← BoxF([FiExitBox_origin[0]; FiEntranceBox_origin[1] - T_PlantWall; Z_FiExitWeir], [FiExitBox_origin[0] - L_FiWeir; FiEntranceBox_origin[1]; FiEntranceBox_origin[2] + H_FiExit], [0; 0; 0]*deg)
    exitweir2 ← BoxF([FiExitBox_origin[0]; FiEntranceBox_origin[1] - 2*T_PlantWall - W_FiOverflow; Z_FiExitWeir], [
        FiExitBox_origin[0] - L_FiWeir;
        FiEntranceBox_origin[1] - T_PlantWall - W_FiOverflow;
        FiEntranceBox_origin[2] + H_FiExit
    ], [0; 0; 0]*deg)
    bwweir ← BoxF([Fi_origin[0] + 2*T_PlantWall + L_FiBw; FiExitBox_origin[1] - 2*T_PlantWall - W_FiBw/2; Z_FiBwWeir], [
        Fi_origin[0] + T_PlantWall + L_FiBw;
        (FiExitBox_origin[1] - 2*T_PlantWall) + W_FiBw/2;
        Z_FiBwBottom + H_FiBw
    ], [0; 0; 0]*deg)
    group2 ← GroupAll("DeleteMe")
    subtractweirs ← SubtractF(["SRSFcontrolboxes"; "FilterBWDrainChannel"], "DeleteMe")
    layernewcoup ← layer_new("controlcouplings", green)
    ecoupling0 ← CouplingSUBF([FiExitCoupling0_origin[0]; FiBwInletCoupling_origin[1]; FiExitCoupling0_origin[2]], [0; 90]*deg, ND_FiTrunk, EN_PipeSpec, ["SRSFcontrolboxes"])
    ecoupling02 ← CouplingSUBF([
        FiExitCoupling0_origin[0];
        FiEntranceBox_origin[1] - W_FiEntrance - 2*T_PlantWall - W_FiOverflow + (0.5*ND_FiBwTrunk) + T_ConcreteMin;
        FiExitCoupling0_origin[2]
    ], [0; 90]*deg, ND_FiTrunk, EN_PipeSpec, ["SRSFcontrolboxes"])
    ecoupling1 ← CouplingSUBF([FiExitCoupling1_origin[0]; FiBwInletCoupling_origin[1]; FiExitCoupling1_origin[2]], [0; 90]*deg, ND_FiTrunk, EN_PipeSpec, ["SRSFcontrolboxes"])
    ecoupling12 ← CouplingSUBF([
        FiExitCoupling1_origin[0];
        FiEntranceBox_origin[1] - W_FiEntrance - 2*T_PlantWall - W_FiOverflow + (0.5*ND_FiBwTrunk) + T_ConcreteMin;
        FiExitCoupling1_origin[2]
    ], [0; 90]*deg, ND_FiTrunk, EN_PipeSpec, ["SRSFcontrolboxes"])
    ecoupling2 ← CouplingSUBF([FiExitCoupling0_origin[0]; FiExitCoupling2_origin[1]; FiExitCoupling2_origin[2]], [0; 90]*deg, ND_FiTrunk, EN_PipeSpec, ["SRSFcontrolboxes"])
    ecoupling22 ← CouplingSUBF([
        FiExitCoupling0_origin[0];
        FiExitBox_origin[1] - 2*T_PlantWall - W_FiOverflow - T_ConcreteMin - (0.5*ND_FiTrunk);
        FiExitCoupling2_origin[2]
    ], [0; 90]*deg, ND_FiTrunk, EN_PipeSpec, ["SRSFcontrolboxes"])
    ecoupling3 ← CouplingSUBF([FiExitCoupling3_origin[0]; FiExitCoupling3_origin[1]; FiExitCoupling3_origin[2]], [0; 90]*deg, ND_FiTrunk, EN_PipeSpec, ["SRSFcontrolboxes"])
    ecoupling32 ← CouplingSUBF([
        FiExitCoupling3_origin[0];
        FiExitBox_origin[1] - 2*T_PlantWall - W_FiOverflow - T_ConcreteMin - (0.5*ND_FiTrunk);
        FiExitCoupling3_origin[2]
    ], [0; 90]*deg, ND_FiTrunk, EN_PipeSpec, ["SRSFcontrolboxes"])
    bwcoupling1 ← CouplingSUBF([FiBwInletCoupling_origin[0]; FiBwInletCoupling_origin[1]; FiBwInletCoupling_origin[2]], [0; 90]*deg, ND_FiBwTrunk, EN_PipeSpec, ["SRSFcontrolboxes"])
    bwcoupling2 ← CouplingSUBF([
        FiBwInletCoupling_origin[0];
        FiEntranceBox_origin[1] - W_FiEntrance - 2*T_PlantWall - W_FiOverflow + (0.5*ND_FiBwTrunk) + T_ConcreteMin;
        FiBwInletCoupling_origin[2]
    ], [0; 90]*deg, ND_FiBwTrunk, EN_PipeSpec, ["SRSFcontrolboxes"])
    icoupling1 ← CouplingSUBF([FiInletCoupling1_origin[0]; FiBwInletCoupling_origin[1]; FiInletCoupling1_origin[2]], [0; 90]*deg, ND_FiTrunk, EN_PipeSpec, ["SRSFcontrolboxes"])
    icoupling12 ← CouplingSUBF([
        FiInletCoupling1_origin[0];
        FiEntranceBox_origin[1] - W_FiEntrance - 2*T_PlantWall - W_FiOverflow + (0.5*ND_FiBwTrunk) + T_ConcreteMin;
        FiInletCoupling1_origin[2]
    ], [0; 90]*deg, ND_FiTrunk, EN_PipeSpec, ["SRSFcontrolboxes"])
    icoupling2 ← CouplingSUBF([
        FiInletCoupling2_origin[0];
        FiEntranceBox_origin[1] + 2*T_ConcreteMin + 1.5*ND_FiTrunk;
        FiInletCoupling2_origin[2]
    ], [0; 90]*deg, ND_FiTrunk, EN_PipeSpec, ["SRSFcontrolboxes"])
    icoupling22 ← CouplingSUBF([
        FiInletCoupling2_origin[0];
        FiExitBox_origin[1] - 2*T_PlantWall - W_FiOverflow - 2*T_ConcreteMin - (1.5*ND_FiTrunk);
        FiInletCoupling2_origin[2]
    ], [0; 90]*deg, ND_FiTrunk, EN_PipeSpec, ["SRSFcontrolboxes"])
    icoupling3 ← CouplingSUBF([
        FiInletCoupling3_origin[0];
        FiEntranceBox_origin[1] + 2*T_ConcreteMin + 1.5*ND_FiTrunk;
        FiInletCoupling3_origin[2]
    ], [0; 90]*deg, ND_FiTrunk, EN_PipeSpec, ["SRSFcontrolboxes"])
    icoupling32 ← CouplingSUBF([
        FiInletCoupling3_origin[0];
        FiExitBox_origin[1] - 2*T_PlantWall - W_FiOverflow - 2*T_ConcreteMin - (1.5*ND_FiTrunk);
        FiInletCoupling3_origin[2]
    ], [0; 90]*deg, ND_FiTrunk, EN_PipeSpec, ["SRSFcontrolboxes"])
    layerset ← layer_set("0")
    layerfreezec ← layer_freeze("controlcouplings")
    layernewcpipes ← layer_new("controlpipes", blue)
    bwpipe1 ← PipeF([FiBwInletCoupling_origin[0]; FiBwInletCoupling_origin[1]; FiBwInletCoupling_origin[2]], H_Fi - H_FiEntrance - ElbowRadius(ND_FiBwTrunk) - ND_FiBwTrunk/2 - SocketDepth(ND_FiBwTrunk), [0; 270]*deg, ND_FiBwTrunk, EN_PipeSpec)
    bwelbow1 ← ElbowF([
        FiBwInletCoupling_origin[0];
        FiBwInletCoupling_origin[1];
        Fi_origin[2] + outerdiameter(ND_FiBwManBranch)/2 + ElbowRadius(ND_FiBwTrunk)
    ], [0; 0; 270]*deg, ND_FiBwTrunk, EN_PipeSpec)
    bwpipe2 ← PipeF([
        FiBwInletCoupling_origin[0];
        FiEntranceBox_origin[1] - W_FiEntrance - 2*T_PlantWall - W_FiOverflow + (0.5*ND_FiBwTrunk) + T_ConcreteMin;
        FiBwInletCoupling_origin[2]
    ], H_Fi - H_FiEntrance - ElbowRadius(ND_FiBwTrunk) - ND_FiBwTrunk/2 - SocketDepth(ND_FiBwTrunk), [0; 270]*deg, ND_FiBwTrunk, EN_PipeSpec)
    bwelbow2 ← ElbowF([
        FiBwInletCoupling_origin[0];
        FiEntranceBox_origin[1] - W_FiEntrance - 2*T_PlantWall - W_FiOverflow + (0.5*ND_FiBwTrunk) + T_ConcreteMin;
        Fi_origin[2] + outerdiameter(ND_FiBwManBranch)/2 + ElbowRadius(ND_FiBwTrunk)
    ], [0; 0; 270]*deg, ND_FiBwTrunk, EN_PipeSpec)
    pipe1 ← PipeF([FiInletCoupling1_origin[0]; FiInletCoupling1_origin[1]; FiInletCoupling1_origin[2]], H_Fi - H_FiEntrance - ElbowRadius(ND_FiTrunk) - ND_FiBwTrunk/2 - 40 cm - SocketDepth(ND_FiTrunk)/2, [0; 270]*deg, ND_FiTrunk, EN_PipeSpec)
    elbow1 ← ElbowF([
        FiInletCoupling1_origin[0];
        FiInletCoupling1_origin[1];
        Fi_origin[2] + outerdiameter(ND_FiBwManBranch)/2 + 40 cm + ElbowRadius(ND_FiTrunk)
    ], [0; 0; 270]*deg, ND_FiTrunk, EN_PipeSpec)
    pipe12 ← PipeF([
        FiInletCoupling1_origin[0];
        FiEntranceBox_origin[1] - W_FiEntrance - 2*T_PlantWall - W_FiOverflow + (0.5*ND_FiBwTrunk) + T_ConcreteMin;
        FiInletCoupling1_origin[2]
    ], H_Fi - H_FiEntrance - ElbowRadius(ND_FiTrunk) - ND_FiBwTrunk/2 - 40 cm - SocketDepth(ND_FiTrunk)/2, [0; 270]*deg, ND_FiTrunk, EN_PipeSpec)
    elbow12 ← ElbowF([
        FiInletCoupling1_origin[0];
        FiEntranceBox_origin[1] - W_FiEntrance - 2*T_PlantWall - W_FiOverflow + (0.5*ND_FiBwTrunk) + T_ConcreteMin;
        Fi_origin[2] + outerdiameter(ND_FiBwManBranch)/2 + 40 cm + ElbowRadius(ND_FiTrunk)
    ], [0; 0; 270]*deg, ND_FiTrunk, EN_PipeSpec)
    pipe2 ← PipeF([
        FiInletCoupling2_origin[0];
        FiEntranceBox_origin[1] + 2*T_ConcreteMin + 1.5*ND_FiTrunk;
        FiInletCoupling2_origin[2]
    ], H_Fi - H_FiEntrance - 2*ElbowRadius(ND_FiTrunk) - ND_FiBwTrunk/2 - 60 cm - SocketDepth(ND_FiTrunk)/2, [0; 270]*deg, ND_FiTrunk, EN_PipeSpec)
    elbow2 ← ElbowF([
        FiExitCoupling1_origin[0];
        FiBwInletCoupling_origin[1] - ElbowRadius(ND_FiTrunk);
        Fi_origin[2] + outerdiameter(ND_FiBwManBranch)/2 + 80 cm
    ], [0; 0; 0]*deg, ND_FiTrunk, EN_PipeSpec)
    pipe2a ← PipeF([
        FiExitCoupling1_origin[0];
        FiBwInletCoupling_origin[1] - ElbowRadius(ND_FiTrunk);
        Fi_origin[2] + outerdiameter(ND_FiBwManBranch)/2 + 80 cm
    ], W_FiExit - 2*T_ConcreteMin - ND_FiTrunk - 3*ElbowRadius(ND_FiTrunk), [90; 0]*deg, ND_FiTrunk, EN_PipeSpec)
    elbow2a ← ElbowF([
        FiExitCoupling1_origin[0];
        FiBwInletCoupling_origin[1] + 2*ElbowRadius(ND_FiTrunk) - W_FiExit + 2*T_ConcreteMin + ND_FiTrunk - SocketDepth(ND_FiTrunk);
        Fi_origin[2] + outerdiameter(ND_FiBwManBranch)/2 + 80 cm
    ], [90; 90; 0]*deg, ND_FiTrunk, EN_PipeSpec)
    pipe2b ← PipeF([
        FiInletCoupling2_origin[0] - ElbowRadius(ND_FiTrunk);
        FiEntranceBox_origin[1] + 2*T_ConcreteMin + 1.5*ND_FiTrunk;
        Fi_origin[2] + outerdiameter(ND_FiBwManBranch)/2 + 80 cm
    ], 2*L_FiExit - 2*T_ConcreteMin - ND_FiTrunk - 4*ElbowRadius(ND_FiTrunk), [0; 0]*deg, ND_FiTrunk, EN_PipeSpec)
    pipe22 ← PipeF([
        FiInletCoupling2_origin[0];
        FiExitBox_origin[1] - 2*T_PlantWall - W_FiOverflow - 2*T_ConcreteMin - (1.5*ND_FiTrunk);
        FiInletCoupling2_origin[2]
    ], H_Fi - H_FiEntrance - 2*ElbowRadius(ND_FiTrunk) - ND_FiBwTrunk/2 - 60 cm - SocketDepth(ND_FiTrunk)/2, [0; 270]*deg, ND_FiTrunk, EN_PipeSpec)
    elbow22 ← ElbowF([
        FiExitCoupling1_origin[0];
        FiEntranceBox_origin[1] - W_FiEntrance - 2*T_PlantWall - W_FiOverflow + (0.5*ND_FiBwTrunk) + T_ConcreteMin + ElbowRadius(ND_FiTrunk);
        Fi_origin[2] + outerdiameter(ND_FiBwManBranch)/2 + 80 cm
    ], [0; 0; 180]*deg, ND_FiTrunk, EN_PipeSpec)
    pipe22a ← PipeF([
        FiExitCoupling1_origin[0];
        FiEntranceBox_origin[1] - W_FiEntrance - 2*T_PlantWall - W_FiOverflow + (0.5*ND_FiBwTrunk) + T_ConcreteMin + ElbowRadius(ND_FiTrunk);
        Fi_origin[2] + outerdiameter(ND_FiBwManBranch)/2 + 80 cm
    ], W_FiExit - 2*T_ConcreteMin - ND_FiTrunk - 3*ElbowRadius(ND_FiTrunk), [270; 0]*deg, ND_FiTrunk, EN_PipeSpec)
    elbow22a ← ElbowF([
        FiExitCoupling1_origin[0];
        FiEntranceBox_origin[1] - 2*T_PlantWall - W_FiOverflow - 0.5*ND_FiBwTrunk - T_ConcreteMin - 2*ElbowRadius(ND_FiTrunk) + SocketDepth(ND_FiTrunk);
        Fi_origin[2] + outerdiameter(ND_FiBwManBranch)/2 + 80 cm
    ], [0; 180; 0]*deg, ND_FiTrunk, EN_PipeSpec)
    pipe22b ← PipeF([
        FiInletCoupling2_origin[0] - ElbowRadius(ND_FiTrunk);
        FiExitBox_origin[1] - 2*T_PlantWall - W_FiOverflow - 2*T_ConcreteMin - (1.5*ND_FiTrunk);
        Fi_origin[2] + outerdiameter(ND_FiBwManBranch)/2 + 80 cm
    ], 2*L_FiExit - 2*T_ConcreteMin - ND_FiTrunk - 4*ElbowRadius(ND_FiTrunk), [0; 0]*deg, ND_FiTrunk, EN_PipeSpec)
    pipe3 ← PipeF([
        FiInletCoupling3_origin[0];
        FiEntranceBox_origin[1] + 2*T_ConcreteMin + 1.5*ND_FiTrunk;
        FiInletCoupling3_origin[2]
    ], 50 cm, [0; 270]*deg, ND_FiTrunk, EN_PipeSpec)
    pipe32 ← PipeF([
        FiInletCoupling3_origin[0];
        FiExitBox_origin[1] - 2*T_PlantWall - W_FiOverflow - 2*T_ConcreteMin - (1.5*ND_FiTrunk);
        FiInletCoupling3_origin[2]
    ], 50 cm, [0; 270]*deg, ND_FiTrunk, EN_PipeSpec)
    epipe1 ← PipeF([FiExitCoupling0_origin[0]; FiBwInletCoupling_origin[1]; FiExitCoupling0_origin[2]], H_Fi - H_FiEntrance - ElbowRadius(ND_FiTrunk) - ND_FiBwTrunk/2 - 60 cm - SocketDepth(ND_FiTrunk)/2, [0; 270]*deg, ND_FiTrunk, EN_PipeSpec)
    eelbow1 ← ElbowF([
        FiExitCoupling0_origin[0];
        FiBwInletCoupling_origin[1];
        Fi_origin[2] + outerdiameter(ND_FiBwManBranch)/2 + 60 cm + ElbowRadius(ND_FiTrunk)
    ], [0; 0; 270]*deg, ND_FiTrunk, EN_PipeSpec)
    epipe12 ← PipeF([
        FiExitCoupling0_origin[0];
        FiEntranceBox_origin[1] - W_FiEntrance - 2*T_PlantWall - W_FiOverflow + (0.5*ND_FiBwTrunk) + T_ConcreteMin;
        FiExitCoupling0_origin[2]
    ], H_Fi - H_FiEntrance - ElbowRadius(ND_FiTrunk) - ND_FiBwTrunk/2 - 60 cm - SocketDepth(ND_FiTrunk)/2, [0; 270]*deg, ND_FiTrunk, EN_PipeSpec)
    eelbow12 ← ElbowF([
        FiExitCoupling0_origin[0];
        FiEntranceBox_origin[1] - W_FiEntrance - 2*T_PlantWall - W_FiOverflow + (0.5*ND_FiBwTrunk) + T_ConcreteMin;
        Fi_origin[2] + outerdiameter(ND_FiBwManBranch)/2 + 60 cm + ElbowRadius(ND_FiTrunk)
    ], [0; 0; 270]*deg, ND_FiTrunk, EN_PipeSpec)
    epipe2 ← PipeF([FiExitCoupling1_origin[0]; FiBwInletCoupling_origin[1]; FiExitCoupling1_origin[2]], H_Fi - H_FiEntrance - ElbowRadius(ND_FiTrunk) - ND_FiBwTrunk/2 - 100 cm - SocketDepth(ND_FiTrunk)/2, [0; 270]*deg, ND_FiTrunk, EN_PipeSpec)
    eelbow2 ← ElbowF([
        FiExitCoupling1_origin[0];
        FiBwInletCoupling_origin[1];
        Fi_origin[2] + outerdiameter(ND_FiBwManBranch)/2 + 100 cm + ElbowRadius(ND_FiTrunk)
    ], [0; 0; 270]*deg, ND_FiTrunk, EN_PipeSpec)
    epipe22 ← PipeF([
        FiExitCoupling1_origin[0];
        FiEntranceBox_origin[1] - W_FiEntrance - 2*T_PlantWall - W_FiOverflow + (0.5*ND_FiBwTrunk) + T_ConcreteMin;
        FiExitCoupling1_origin[2]
    ], H_Fi - H_FiEntrance - ElbowRadius(ND_FiTrunk) - ND_FiBwTrunk/2 - (100 cm) - SocketDepth(ND_FiTrunk)/2, [0; 270]*deg, ND_FiTrunk, EN_PipeSpec)
    eelbow22 ← ElbowF([
        FiExitCoupling1_origin[0];
        FiEntranceBox_origin[1] - W_FiEntrance - 2*T_PlantWall - W_FiOverflow + (0.5*ND_FiBwTrunk) + T_ConcreteMin;
        Fi_origin[2] + outerdiameter(ND_FiBwManBranch)/2 + 100 cm + ElbowRadius(ND_FiTrunk)
    ], [0; 0; 270]*deg, ND_FiTrunk, EN_PipeSpec)
    epipe3 ← PipeF([FiExitCoupling0_origin[0]; FiExitCoupling2_origin[1]; FiExitCoupling2_origin[2]], 50 cm, [0; 270]*deg, ND_FiTrunk, EN_PipeSpec)
    epipe32 ← PipeF([
        FiExitCoupling0_origin[0];
        FiExitBox_origin[1] - 2*T_PlantWall - W_FiOverflow - T_ConcreteMin - (0.5*ND_FiTrunk);
        FiExitCoupling2_origin[2]
    ], 50 cm, [0; 270]*deg, ND_FiTrunk, EN_PipeSpec)
    epipe4 ← PipeF([FiExitCoupling3_origin[0]; FiExitCoupling3_origin[1]; FiExitCoupling3_origin[2]], H_Fi - H_FiEntrance - ElbowRadius(ND_FiTrunk) - ND_FiBwTrunk/2 - 20 cm - SocketDepth(ND_FiTrunk)/2, [0; 270]*deg, ND_FiTrunk, EN_PipeSpec)
    eelbow4 ← ElbowF([
        FiExitCoupling1_origin[0];
        FiBwInletCoupling_origin[1] - ElbowRadius(ND_FiTrunk);
        Fi_origin[2] + outerdiameter(ND_FiBwManBranch)/2 + 20 cm
    ], [0; 0; 0]*deg, ND_FiTrunk, EN_PipeSpec)
    epipe4a ← PipeF([
        FiExitCoupling1_origin[0];
        FiBwInletCoupling_origin[1] - ElbowRadius(ND_FiTrunk);
        Fi_origin[2] + outerdiameter(ND_FiBwManBranch)/2 + 20 cm
    ], W_FiExit - 2*T_ConcreteMin - ND_FiTrunk - 2*ElbowRadius(ND_FiTrunk), [90; 0]*deg, ND_FiTrunk, EN_PipeSpec)
    eelbow4a ← ElbowF([
        FiExitCoupling3_origin[0];
        FiExitCoupling3_origin[1] - ElbowRadius(ND_FiTrunk);
        Fi_origin[2] + outerdiameter(ND_FiBwManBranch)/2 + 20 cm
    ], [0; 0; 90]*deg, ND_FiTrunk, EN_PipeSpec)
    epipe42 ← PipeF([
        FiExitCoupling3_origin[0];
        FiExitBox_origin[1] - 2*T_PlantWall - W_FiOverflow - T_ConcreteMin - (0.5*ND_FiTrunk);
        FiExitCoupling3_origin[2]
    ], H_Fi - H_FiEntrance - ElbowRadius(ND_FiTrunk) - ND_FiBwTrunk/2 - 20 cm - SocketDepth(ND_FiTrunk)/2, [0; 270]*deg, ND_FiTrunk, EN_PipeSpec)
    eelbow42 ← ElbowF([
        FiExitCoupling1_origin[0];
        FiEntranceBox_origin[1] - W_FiEntrance - 2*T_PlantWall - W_FiOverflow + (0.5*ND_FiBwTrunk) + T_ConcreteMin + ElbowRadius(ND_FiTrunk);
        Fi_origin[2] + outerdiameter(ND_FiBwManBranch)/2 + 20 cm
    ], [0; 0; 180]*deg, ND_FiTrunk, EN_PipeSpec)
    epipe42a ← PipeF([
        FiExitCoupling1_origin[0];
        FiEntranceBox_origin[1] - W_FiEntrance - 2*T_PlantWall - W_FiOverflow + (0.5*ND_FiBwTrunk) + T_ConcreteMin + ElbowRadius(ND_FiTrunk);
        Fi_origin[2] + outerdiameter(ND_FiBwManBranch)/2 + 20 cm
    ], W_FiExit - 2*T_ConcreteMin - ND_FiTrunk - 2*ElbowRadius(ND_FiTrunk), [270; 0]*deg, ND_FiTrunk, EN_PipeSpec)
    eelbow42a ← ElbowF([
        FiExitCoupling3_origin[0];
        FiExitBox_origin[1] - 2*T_PlantWall - W_FiOverflow - T_ConcreteMin - (0.5*ND_FiTrunk) - ElbowRadius(ND_FiTrunk);
        Fi_origin[2] + outerdiameter(ND_FiBwManBranch)/2 + 20 cm
    ], [0; 90; 0]*deg, ND_FiTrunk, EN_PipeSpec)
    layersetpipe ← layer_set("0")
    layerfrpipe ← layer_freeze("controlpipes")
    bigunion ← union_allA
    layerfreezefilt ← layer_freeze("SRSFcontrolboxes")
    one ← stack(layernewfilt, tankbw, tankbw2, tankfilt, tankfilt2, group, entweir, entweir2, exitweir, exitweir2, bwweir, group2, subtractweirs, layernewcoup, ecoupling0, ecoupling02, ecoupling1, ecoupling12, ecoupling2, ecoupling22, ecoupling3, ecoupling32, bwcoupling1, bwcoupling2, icoupling1, icoupling12, icoupling2, icoupling22, icoupling3, icoupling32, layerset, layerfreezefilt, layernewcpipes, bwpipe1, bwelbow1, bwpipe2, bwelbow2)
    two ← stack(one, pipe1, elbow1, pipe12, elbow12, pipe2, elbow2, pipe2a, elbow2a, pipe2b, pipe22, elbow22, pipe22a, elbow22a, pipe22b, pipe3, pipe32, epipe1, eelbow1, epipe12, eelbow12, epipe2, eelbow2, epipe22, eelbow22, epipe3, epipe4, eelbow4, epipe4a, eelbow4a, epipe42, eelbow42, epipe42a, eelbow42a, layersetpipe, layerfrpipe, bigunion, layerfreezefilt)
    return two
AC_Filter := stack(Filterinletchannelscript, Fibwdrainchannelscript, Fiscript, Ficontrolboxscript)
# [component: inputs AC_Filter]
