Q_Plant := 170*L/s
# [reference: ExpertInputs.xmcd]
# [reference: MathFunctions.xmcd]
# [reference: PipeDatabase.xmcd]
# [reference: MaterialsDatabase.xmcd]
# [reference: FluidsFunctions.xmcd]
# [reference: SedTankFunctions.xmcd]
# [reference: CdcFunctions.xmcd]
# [reference: SedimentationTank85Lps.xmcd]
# [reference: Flocculator.xmcd]
# [reference: LFOMvlk24.xmcd]
# [reference: EntranceTankvlk24.xmcd]
# [reference: StackedRapidSandFilter.xmcd]
# [reference: LinearCdc.xmcd]
# [reference: ChemStorageTanks.xmcd]
# AutoCAD drawing programs:
# Translators:
# These are the codes that take MathCAD outputs and create AutoCAD scripts that are used to draw the plant (formerly Basics)
# [reference: MtoATranslators.xmcd]
# The wrapped MtoA translator contains the functions that the user will want to access. These functions will draw pieces with full functionality - specifying the location, dimension, and orientation of the object. Also, it contains layer control and subtraction capabilities for grouped objects.
# [reference: MtoATranslatorsWrapped.xmcd]
# Drawing functions:
# [reference: ChannelF.xmcd]
# [reference: PlumbingF.xmcd]
# [reference: TankF.xmcd]
# [reference: StairsF.xmcd]
# [reference: DrainChannelF.xmcd]
# AutoCAD Script Files:
# [reference: FlocculatorAC85Lps.xmcd]
# [reference: SedimentationTankAC85Lps.xmcd]
# [reference: EntranceTankAC85Lps.xmcd]
# [reference: ChemStockTanksAC85Lps.xmcd]
# Stacked Rapid Sand Filter
# Concrete Box and Plant Drain Channel Origin Points
# The Y position is set so that the northern wall of the filter inlet channel aligns with the northern wall of the sed tanks (we want the inlet pipes to fit along the length of the inlet channel)
Fi_origin := [
    Plant_Origin[0] - (L_Sed - W_SedInletChannel - T_SedWeir) + W_Fi/2 + ConRadius(ND_FiBwTrunk) + S_Fitting;
    Plant_Origin[1] - 5*T_PlantWall - W_PlantDC - 2*W_FiInletChannel - T_FiWall - L_FiEntrance - L_FiExit - W_MpWalkway - L_Fi;
    Z_FiBottom
] = [-4.47976; -7.92884; -3.23711] m
FiEntranceBox_origin := [
    Fi_origin[0] - W_Fi/2 + W_FiEntrance - S_Fitting - ConRadius(ND_FiBwTrunk);
    Plant_Origin[1] - 3*T_PlantWall - 2*W_FiInletChannel - W_PlantDC - L_FiEntrance - T_ChannelWall;
    Z_FiEntranceBottom
]
FiExitBox_origin := FiEntranceBox_origin + [0; -T_ChannelWall - L_FiExit; 0]
FiInletChannel_Origin := [
    Plant_Origin[0] + (L_FiInletChannel - (L_Sed - W_SedInletChannel - T_SedWeir));
    Plant_Origin[1] - W_PlantDC - 2*W_FiInletChannel - 3*T_PlantWall;
    Z_FiInletChannelBottom
]
FiOverflowBox_Origin := [
    FiEntranceBox_origin[0] + T_ChannelWall + W_FiOverflow;
    FiEntranceBox_origin[1];
    Z_FiOverflowBottom
]
FiDistBox_Origin := [FiOverflowBox_Origin[0]; FiOverflowBox_Origin[1] - L_FiExit - T_ChannelWall; FiExitBox_origin[2]]
PlantDC_Origin := [
    Plant_Origin[0] - L_Sed - T_PlantWall - W_PlantDC;
    Plant_Origin[1] - T_PlantWall;
    Z_PlantUpperDCBottom + H_PlantDC
]
PlantLowerDC_Origin := [
    Plant_Origin[0] - L_Sed - T_PlantWall - W_PlantDC;
    Plant_Origin[1] - 2*T_PlantWall - W_FiInletChannel - W_PlantDC - T_ChannelWall;
    Z_PlantLowerDCBottom + H_PlantDC
]
PlantUpperDC_Origin := [
    Plant_Origin[0] - L_Sed - T_PlantWall - W_PlantDC;
    Plant_Origin[1] + N_SedTanks*(W_Sed + T_PlantWall) - T_PlantWall + W_Fi/2 - ConRadius(ND_FiBwTrunk) - S_Fitting;
    Z_PlantUpperDCBottom + H_PlantDC
]
PlantSideDC_Origin := [
    Plant_Origin[0] - L_Sed - T_PlantWall;
    Plant_Origin[1] - 2*T_PlantWall - W_FiInletChannel;
    Z_PlantLowerDCBottom + H_PlantDC
]
# Coupling Origin Points
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# This will be the pipe layout in the entrance and exit boxes to allow for 2 90 degree elbows in  Pipes 2 and 3 coming from the entrance box (on the right)
FiInletCoupling1_origin := [
    FiEntranceBox_origin[0] - W_FiEntrance + ConRadius(ND_FiBwTrunk) + S_Fitting;
    FiEntranceBox_origin[1] + T_ConcreteMin + ConRadius(ND_FiTrunk);
    FiEntranceBox_origin[2] - CouplingLength(ND_FiTrunk) + SocketDepth(ND_FiTrunk)
]
FiBwInletCoupling_origin := [
    FiInletCoupling1_origin[0];
    FiInletCoupling1_origin[1] + L_FiOverflowWeir - S_Fitting - 2*ConRadius(ND_FiBwTrunk);
    FiEntranceBox_origin[2] - CouplingLength(ND_FiBwTrunk) + SocketDepth(ND_FiBwTrunk)
]
FiInletCoupling2_origin := [
    FiEntranceBox_origin[0] - 2*T_ConcreteMin - 3*ConRadius(ND_FiTrunk);
    FiEntranceBox_origin[1] + L_FiOverflowWeir - (ConRadius(ND_FiTrunk) + S_Fitting);
    FiInletCoupling1_origin[2]
]
FiInletCoupling3_origin := [
    FiEntranceBox_origin[0] - 2*T_ConcreteMin - 3*ConRadius(ND_FiTrunk);
    FiEntranceBox_origin[1] + T_ConcreteMin + ConRadius(ND_FiTrunk);
    FiEntranceBox_origin[2] - CouplingLength(ND_FiTrunk) + SocketDepth(ND_FiTrunk)
]
FiExitCoupling0_origin := [
    FiInletCoupling1_origin[0];
    FiExitBox_origin[1] + L_FiExit - T_ConcreteMin - ConRadius(ND_FiTrunk);
    FiExitBox_origin[2] - CouplingLength(ND_FiTrunk) + SocketDepth(ND_FiTrunk)
]
FiExitCoupling1_origin := [
    FiInletCoupling1_origin[0];
    FiExitBox_origin[1] + T_ConcreteMin + ConRadius(ND_FiTrunk);
    FiExitBox_origin[2] - CouplingLength(ND_FiTrunk) + SocketDepth(ND_FiTrunk)
]
FiExitCoupling2_origin := [
    FiExitBox_origin[0] - T_ConcreteMin - ConRadius(ND_FiTrunk);
    FiExitBox_origin[1] + T_ConcreteMin + ConRadius(ND_FiExitWaste);
    FiExitBox_origin[2] - CouplingLength(ND_FiTrunk) + SocketDepth(ND_FiTrunk)
]
FiExitCoupling3_origin := [
    FiExitBox_origin[0] - T_ConcreteMin - ConRadius(ND_FiTrunk);
    FiExitBox_origin[1] + L_FiExit - T_ConcreteMin - ConRadius(ND_FiTrunk);
    FiExitBox_origin[2] - CouplingLength(ND_FiExitWaste) + SocketDepth(ND_FiExitWaste)
]
FiFerncoBwCoupling_origin := [FiBwInletCoupling_origin[0]; Fi_origin[1] + L_Fi; Fi_origin[2] + outerradius(ND_FiBwManBranch)]
FiFerncoCouplings_origin := [FiFerncoBwCoupling_origin[0]; Fi_origin[1] + L_Fi; FiFerncoBwCoupling_origin[2] + H_FiBottomLayer]
FiWallBwCoupling_origin := [
    FiBwInletCoupling_origin[0];
    Fi_origin[1] + T_FiWall + SocketDepth(ND_FiBwTrunk) + L_Fi;
    Fi_origin[2] + outerradius(ND_FiBwManBranch)
] = [-5.51047; -6.12044; -3.21298] m
FiWallCouplings_origin := [
    FiBwInletCoupling_origin[0];
    Fi_origin[1] + T_FiWall + SocketDepth(ND_FiTrunk) + L_Fi;
    Fi_origin[2] + outerradius(ND_FiBwManBranch) + H_FiBottomLayer
]
FiEntranceBox_dim := [W_FiEntrance; L_FiEntrance; H_FiEntrance]
FiExitBox_dim := [W_FiEntrance; L_FiExit; H_FiEntrance]
Fi_dim := [W_Fi; L_Fi; H_Fi]
FiOverflowBox_Dim := [W_FiOverflow; L_FiOverflow; H_FiOverflow]
FiDistBox_Dim := [W_FiOverflow; L_FiExit; H_FiEntrance]
# Concrete Box Dimensions
# Inlet Channel
# Origins and Dimensions
L_FiInletPipe := W_PlantDC + SocketDepth(ND_FiEntrancePipe) + T_PlantWall - (CouplingLength(ND_FiEntrancePipe) - SocketDepth(ND_FiEntrancePipe))
FiInletCoupling_Origin(N) := SedOutletCoupling2_Origin(N) - [0 m; W_PlantDC + T_PlantWall; 0 m]
# Inlet Channel Concrete
LayerFiInletChannel := layer_new("FiInletChannelCon", grey)
FiInletChannel := Tank(FiInletChannel_Origin, [L_FiInletChannel; W_FiInletChannel; H_FiInletChannel], T_PlantWall)
FreezeFiInletChannel := FreezeLayer("FiInletChannelCon")
FiInletChannelConScript := stack(LayerFiInletChannel, FiInletChannel, FreezeFiInletChannel)
# Inlet Channel Coupling(s)
FiInletFittingLayer := layer_new("FiInletFittingsPlu", green)
FiInletFittingFrz := FreezeLayer("FiInletFittingsPlu")
FiInletCouplingScript :=
    Local ← FiInletFittingLayer
    for i ∈ 1 .. N_FiEntrancePipes
        Local ← stack(Local, CouplingSUBF(FiInletCoupling_Origin(i), [90; 0]*deg, ND_FiEntrancePipe, PS_Default, ["FiInletChannelCon"]))
    return stack(Local, FiInletFittingFrz)
# Inlet Pipes from Sedimentation
FiInletPipeLayer := layer_new("FiInletPipePlu", blue)
FiInletPipeFrz := FreezeLayer("FiInletPipePlu")
FiInletPipe :=
    Local ← FiInletPipeLayer
    for i ∈ 1 .. N_FiEntrancePipes
        Local ← stack(Local, PipeSUBF(FiInletCoupling_Origin(i), L_FiInletPipe, [-90; 0]*deg, ND_FiEntrancePipe, PS_Default, ["FiInletChannelCon"]))
    return stack(Local, FiInletPipeFrz)
FiInletChannelScript := stack(FiInletChannelConScript, FiInletCouplingScript, FiInletPipe)
# Filter Box Concrete
LayerFiTank := layer_new("FiTankCon", grey)
FiTank := Tank(Fi_origin, Fi_dim, T_FiWall)
FiSiphonManLedgeL := BoxF([
    Fi_origin[0] - T_ConcreteMin - ConRadius(ND_FiSiphon) + 2*S_Fitting;
    Fi_origin[1];
    Z_FiSiphonInlet - ConRadius(ND_FiSiphon) - outerradius(ND_FiSiphon)
], [
    Fi_origin[0] - T_ConcreteMin - ConRadius(ND_FiSiphon) - 2*S_Fitting;
    Fi_origin[1] + T_ConcreteMin;
    Z_FiSiphonInlet - ConRadius(ND_FiSiphon) - outerradius(ND_FiSiphon) - T_ConcreteMin
], [0; 0; 0]*deg)
FiSiphonManLedgeR := BoxF([
    Fi_origin[0] - T_ConcreteMin - ConRadius(ND_FiSiphon) + 2*S_Fitting;
    Fi_origin[1] + L_Fi;
    Z_FiSiphonInlet - ConRadius(ND_FiSiphon) - outerradius(ND_FiSiphon)
], [
    Fi_origin[0] - T_ConcreteMin - ConRadius(ND_FiSiphon) - 2*S_Fitting;
    Fi_origin[1] + L_Fi - T_ConcreteMin;
    Z_FiSiphonInlet - ConRadius(ND_FiSiphon) - outerradius(ND_FiSiphon) - T_ConcreteMin
], [0; 0; 0]*deg)
LayerFiTankFreeze := FreezeLayer("FiTankCon")
FiTankScript := stack(LayerFiTank, FiTank, FiSiphonManLedgeL, FiSiphonManLedgeR, Union_All, LayerFiTankFreeze)
MainDCLayer := layer_new("DrainChannelCon", grey)
SideDCLayer := layer_new("DrainChannelSideCon", grey)
L_PlantLowerDC := (N_SedTanks*(W_Sed + T_PlantWall)) + W_Fi/2 - ConRadius(ND_FiBwTrunk) - S_Fitting + T_PlantWall + W_FiInletChannel + W_PlantDC + T_ChannelWall = 21.8184 m
L_PlantUpperDC := Et_Origin[1] + L_EtHopperFront/2 - (Plant_Origin[1] + N_SedTanks*(W_Sed + T_PlantWall) - ConRadius(ND_FiBwTrunk) - S_Fitting) - W_Fi/2 - T_ChannelWall + 2*T_PlantWall = 6.88533 m
L_PlantSideDC := L_FiInletChannel + W_SedInletChannel + 2*T_PlantWall - T_ChannelWall + T_SedWeir
MainDCLower := DrainChannelF(PlantLowerDC_Origin, [270; 0; 0]*deg, Q_PlantDCMax, W_PlantDC, H_PlantDC, L_PlantLowerDC, Slope_PlantDC, Nu_Water, E_Concrete, 1)
MainDCUpper := DrainChannelF(PlantUpperDC_Origin, [270; 0; 0]*deg, Q_PlantDCMax, W_PlantDC, H_PlantDC, L_PlantUpperDC, Slope_PlantDC, Nu_Water, E_Concrete, 1)
SideLowerDC := DrainChannelF(PlantSideDC_Origin, [180; 0; 0]*deg, Q_PlantDCMax, W_PlantDC, H_PlantDC + (L_PlantLowerDC - L_PlantSideDC)*Slope_PlantDC, L_PlantSideDC, Slope_PlantDC, Nu_Water, E_Concrete, 1)
MainDC := DrainChannelF(PlantDC_Origin, [270; 0; 0]*deg, Q_PlantDCMax, W_PlantDC, H_PlantDC, L_PlantDC, Slope_PlantDC, Nu_Water, E_Concrete, 1)
MainDCScript :=
    stack(MainDCLayer, MainDC) if Z_PlantLowerDCBottom > Z_PlantUpperDCBottom - Slope_PlantDC*L_PlantUpperDC - 10 cm
    stack(MainDCLayer, MainDCLower, MainDCUpper) otherwise
SideDCScript := stack(SideDCLayer, SideLowerDC)
DCWestWallLower := BoxF([
    Plant_Origin[0] - L_Sed - T_PlantWall - W_PlantDC;
    Plant_Origin[1] - 2*T_PlantWall - W_FiInletChannel;
    PlantLowerDC_Origin[2]
], [
    Plant_Origin[0] - L_Sed - W_PlantDC - T_PlantWall - T_ChannelWall;
    PlantLowerDC_Origin[1] + L_PlantLowerDC + T_ChannelWall;
    Z_Walkway - T_Floor
], [0; 0; 0]*deg)
DCWestWallUpper := BoxF([Plant_Origin[0] - L_Sed - T_PlantWall - W_PlantDC; PlantUpperDC_Origin[1]; PlantUpperDC_Origin[2]], [
    Plant_Origin[0] - L_Sed - W_PlantDC - T_PlantWall - T_ChannelWall;
    PlantUpperDC_Origin[1] + L_PlantUpperDC;
    Z_Walkway - T_Floor
], [0; 0; 0]*deg)
DCEastWallLower := BoxF([
    Plant_Origin[0] - L_Sed - T_PlantWall;
    Plant_Origin[1] - 2*T_PlantWall - W_FiInletChannel;
    PlantLowerDC_Origin[2]
], [
    Plant_Origin[0] - L_Sed + T_ChannelWall - T_PlantWall;
    PlantLowerDC_Origin[1] + L_PlantLowerDC + T_ChannelWall;
    Z_Walkway - T_Floor
], [0; 0; 0]*deg)
DCEastWallUpper := BoxF([Plant_Origin[0] - L_Sed - T_PlantWall; PlantUpperDC_Origin[1]; PlantUpperDC_Origin[2]], [
    Plant_Origin[0] - L_Sed + T_ChannelWall - T_PlantWall;
    PlantUpperDC_Origin[1] + L_PlantUpperDC;
    Z_Walkway - T_Floor
], [0; 0; 0]*deg)
DCNorthWall := BoxF([
    Plant_Origin[0] - L_Sed;
    PlantUpperDC_Origin[1] + L_PlantUpperDC - T_ChannelWall;
    PlantUpperDC_Origin[2]
], [
    Plant_Origin[0] - L_Sed - T_ChannelWall - W_PlantDC - T_PlantWall;
    PlantUpperDC_Origin[1] + L_PlantUpperDC;
    Z_Walkway - T_Floor
], [0; 0; 0]*deg)
DCSideNorthWall := BoxF([
    Plant_Origin[0] - L_Sed - T_PlantWall;
    Plant_Origin[1] - 2*T_PlantWall - W_FiInletChannel + T_ChannelWall;
    Z_PlantLowerDCBottom + H_PlantDC
], [
    Plant_Origin[0] - L_Sed - T_PlantWall + L_PlantSideDC + T_ChannelWall;
    Plant_Origin[1] - 2*T_PlantWall - W_FiInletChannel;
    Z_Walkway - T_Floor
], [0; 0; 0]*deg)
DCSideSouthWall := BoxF([
    Plant_Origin[0] - L_Sed - T_PlantWall;
    Plant_Origin[1] - 2*T_PlantWall - W_FiInletChannel - W_PlantDC;
    Z_PlantLowerDCBottom + H_PlantDC
], [
    Plant_Origin[0] - L_Sed - T_PlantWall + L_PlantSideDC + T_ChannelWall;
    Plant_Origin[1] - 2*T_PlantWall - W_FiInletChannel - T_ChannelWall - W_PlantDC;
    Z_Walkway - T_Floor
], [0; 0; 0]*deg)
DCSideOuterWall := BoxF([
    Plant_Origin[0] - L_Sed - T_PlantWall + L_PlantSideDC + T_ChannelWall;
    Plant_Origin[1] - 2*T_PlantWall - W_FiInletChannel;
    Z_PlantLowerDCBottom + H_PlantDC
], [
    Plant_Origin[0] - L_Sed - T_PlantWall + L_PlantSideDC;
    Plant_Origin[1] - 2*T_PlantWall - W_FiInletChannel - T_ChannelWall - W_PlantDC;
    Z_Walkway - T_Floor
], [0; 0; 0]*deg)
FrzDrainChannel := FreezeLayer("DrainChannelCon")
FrzSideDrainChannel := FreezeLayer("DrainChannelSideCon")
SedDCCutout := BoxF([Plant_Origin[0] - L_Sed; Plant_Origin[1] - T_PlantWall; Plant_Origin[2] - T_PlantWall], [
    Plant_Origin[0] - L_Sed - T_PlantWall;
    Plant_Origin[1] + W_Sed*N_SedTanks + T_SedWallDivider*N_SedTanks - T_SedWallDivider + T_PlantWall;
    Z_Walkway - T_Floor
], [0; 0; 0]*deg)
MirrorSedDCCutout := Mirror3dLast("yz", [Floc_Origin[0] - L_Floc - W_PlantDC/2 - T_PlantWall; 0 m], "n")
EtDrainChannelCutout := BoxF([
    FlocCoupling_Origin[0] + ConRadius(ND_RMPipe) + S_Fitting;
    EtDC_Origin[1] + W_EtDC;
    Et_Origin[2] - T_PlantWall
], [
    FlocCoupling_Origin[0] + ConRadius(ND_RMPipe) + S_Fitting + T_ChannelWall;
    EtDC_Origin[1];
    EtDC_Origin[2] - H_EtDC - Slope_EtDC*L_EtDC
], [0; 0; 0]*deg)
DrainChannelBoxCutout := BoxF([
    Plant_Origin[0] - L_Sed - T_PlantWall - W_PlantDC;
    PlantUpperDC_Origin[1];
    Z_PlantUpperDCBottom - Slope_PlantDC*L_PlantUpperDC
], [Plant_Origin[0] - L_Sed - T_PlantWall; PlantUpperDC_Origin[1] + T_PlantWall; Plant_Origin[2]], [0; 0; 0]*deg)
DrainChannelWedgeCutout := WedgeF([
    Plant_Origin[0] - L_Sed - T_PlantWall;
    PlantUpperDC_Origin[1] - T_ChannelWall;
    Z_PlantUpperDCBottom - Slope_PlantDC*L_PlantUpperDC
], [
    Plant_Origin[0] - L_Sed - T_PlantWall - T_ChannelWall;
    PlantUpperDC_Origin[1] - T_ChannelWall - W_PlantDC;
    Z_PlantUpperDCBottom - Slope_PlantDC*(L_PlantUpperDC + T_ChannelWall)
], [270; 0; 0]*deg)
FiDrainChannelCutout := BoxF([
    Plant_Origin[0] - L_Sed - T_PlantWall - W_PlantDC - T_PlantWall;
    Plant_Origin[1] - 2*T_PlantWall - W_FiInletChannel - W_PlantDC - T_ChannelWall;
    Z_PlantLowerDCBottom + H_PlantDC
], [
    Plant_Origin[0] - L_Sed;
    Plant_Origin[1] - 2*T_PlantWall - W_FiInletChannel;
    Z_PlantLowerDCBottom - (L_PlantLowerDC - T_PlantWall - W_PlantDC)*Slope_PlantDC
], [0; 0; 0]*deg)
FiInletChannelCutout := BoxF([
    Plant_Origin[0] - L_Sed - T_PlantWall + L_PlantSideDC + T_ChannelWall;
    Plant_Origin[1] - 2*T_PlantWall - W_FiInletChannel - T_ChannelWall - W_PlantDC;
    Z_Walkway - T_Floor
], [
    Plant_Origin[0] - L_Sed - T_PlantWall;
    Plant_Origin[1] - 2*T_PlantWall - W_FiInletChannel - W_PlantDC;
    Z_FiInletChannelBottom - T_PlantWall
], [0; 0; 0]*deg)
MirrorFiInletChannelCutout := Mirror3dLast("yz", [Floc_Origin[0] - L_Floc - W_PlantDC/2 - T_PlantWall; 0 m], "n")
SubtractDCCutouts := SubtractF(["DrainChannelCon"], "DeleteMe")
SubtractDCSideCutouts := SubtractF(["DrainChannelSideCon"], "DeleteMe")
DCUpperWalls := stack(DCWestWallLower, DCWestWallUpper, DCEastWallLower, DCEastWallUpper, DCNorthWall, Union_All, FrzDrainChannel)
DCUpperSideWalls := stack(DCSideNorthWall, DCSideSouthWall, DCSideOuterWall, Union_All, FrzSideDrainChannel)
DCWallCutouts := stack(SedDCCutout, MirrorSedDCCutout, DrainChannelBoxCutout, DrainChannelWedgeCutout, EtDrainChannelCutout, FiDrainChannelCutout, GroupDelete, SubtractDCCutouts)
DCSideWallCutouts := stack(FiInletChannelCutout, GroupDelete, SubtractDCSideCutouts)
PlantDrainChannelScript := stack(MainDCScript, DCUpperWalls, DCWallCutouts, SideDCScript, DCUpperSideWalls, DCSideWallCutouts, ThawMultiple(["DrainChannelCon"; "DrainChannelSideCon"]), Union_All, FreezeMultiple(["DrainChannelCon"; "DrainChannelSideCon"]))
# Plant Drain Channel
# Filter Box Manifold Connections: Fernco Couplings, Outer Wall Couplings, and Through-wall Pipes
# Fernco Couplings
LayerFiFernco := layer_new("FiFerncoCouplingsPlu", purple)
FiFerncoBwCoupling := FerncoCouplingF(FiFerncoBwCoupling_origin, [90; 0; 0]*deg, ND_FiBwTrunk, L_FiManFerncoCoupling)
FiFerncoCoupling := FerncoCouplingF(FiFerncoCouplings_origin, [90; 0; 0]*deg, ND_FiTrunk, L_FiManFerncoCoupling)
ArrayFiManifoldLast := ArrayLast(N_FiLayer, 1, H_FiLayer)
LayerFiFerncoFreeze := FreezeLayer("FiFerncoCouplingsPlu")
FiFerncoScript := stack(LayerFiFernco, FiFerncoBwCoupling, FiFerncoCoupling, view("f"), ArrayFiManifoldLast, view("t"), LayerFiFerncoFreeze)
# Filter Wall Couplings
LayerFiFittingPlu := layer_new("FiFittingsPlu", green)
FiWallBwCoupling := CouplingF(FiWallBwCoupling_origin, [-90; 0]*deg, ND_FiBwTrunk, PS_Default)
FiWallCoupling := CouplingF(FiWallCouplings_origin, [-90; 0]*deg, ND_FiTrunk, PS_Default)
LayerFiFittingFrz := FreezeLayer("FiFittingsPlu")
FiWallCouplingScript := stack(LayerFiFittingPlu, FiWallBwCoupling, FiWallCoupling, view("f"), ArrayFiManifoldLast, view("t"), LayerFiFittingFrz)
# Through-wall Pipes
LayerFiPipePlu := layer_new("FiPipePlu", blue)
FiBwConPipe := PipeSUBF(FiWallBwCoupling_origin + [0 m; 0 m; 0 m], L_FiManFerncoCoupling/2 + T_FiWall + SocketDepth(ND_FiBwTrunk), [90; 0; 0]*deg, ND_FiBwTrunk, PS_Default, ["FiTankCon"])
FiConPipe1 := PipeSUBF(FiWallCouplings_origin + [0 m; 0 m; 0 m], L_FiManFerncoCoupling/2 + T_FiWall + SocketDepth(ND_FiTrunk), [90; 0; 0]*deg, ND_FiTrunk, PS_Default, ["FiTankCon"])
FiConPipe2 := PipeSUBF(FiWallCouplings_origin + [0 m; 0 m; H_FiLayer], L_FiManFerncoCoupling/2 + T_FiWall + SocketDepth(ND_FiTrunk), [90; 0; 0]*deg, ND_FiTrunk, PS_Default, ["FiTankCon"])
FiConPipe3 := PipeSUBF(FiWallCouplings_origin + [0 m; 0 m; 2*H_FiLayer], L_FiManFerncoCoupling/2 + T_FiWall + SocketDepth(ND_FiTrunk), [90; 0; 0]*deg, ND_FiTrunk, PS_Default, ["FiTankCon"])
FiConPipe4 := PipeSUBF(FiWallCouplings_origin + [0 m; 0 m; 3*H_FiLayer], L_FiManFerncoCoupling/2 + T_FiWall + SocketDepth(ND_FiTrunk), [90; 0; 0]*deg, ND_FiTrunk, PS_Default, ["FiTankCon"])
FiConPipe5 := PipeSUBF(FiWallCouplings_origin + [0 m; 0 m; 4*H_FiLayer], L_FiManFerncoCoupling/2 + T_FiWall + SocketDepth(ND_FiTrunk), [90; 0; 0]*deg, ND_FiTrunk, PS_Default, ["FiTankCon"])
FiConPipe6 := PipeSUBF(FiWallCouplings_origin + [0 m; 0 m; 5*H_FiLayer], L_FiManFerncoCoupling/2 + T_FiWall + SocketDepth(ND_FiTrunk), [90; 0; 0]*deg, ND_FiTrunk, PS_Default, ["FiTankCon"])
LayerFiPipeFrz := FreezeLayer("FiPipePlu")
FiWallPipeScript := stack(LayerFiPipePlu, FiBwConPipe, FiConPipe1, FiConPipe2, FiConPipe3, FiConPipe4, FiConPipe5, FiConPipe6, LayerFiPipeFrz)
FiManWallScript := stack(FiFerncoScript, FiWallCouplingScript, FiWallPipeScript)
# Manifold Trunks and Branch Receivers
# Branch Receivers
LayerFiManPipe := layer_new("FiManPipePlu", blue)
FiBranchHolder := PipeF([
    Fi_origin[0] + ConRadius(ND_FiBwBranchHolder) + S_FiManAssembly - W_Fi;
    Fi_origin[1] + CapThickness(ND_FiBranchHolder) + S_FiManAssembly;
    Fi_origin[2] + H_FiBottomLayer + outerradius(ND_FiBwManBranch)
], L_Fi - 2*CapThickness(ND_FiBranchHolder) - 2*S_FiManAssembly, [-90; 0]*deg, ND_FiBranchHolder, PS_Default)
LayerFiManCaps := layer_new("FiManCapPlu", green)
FiBranchHolderCapRight := CapF([
    Fi_origin[0] + ConRadius(ND_FiBwBranchHolder) + S_FiManAssembly - W_Fi;
    Fi_origin[1] + CapThickness(ND_FiBranchHolder) + S_FiManAssembly;
    Fi_origin[2] + H_FiBottomLayer + outerradius(ND_FiBwManBranch)
], [270; 0]*deg, ND_FiBranchHolder)
FiBranchHolderCapLeft := CapF([
    Fi_origin[0] + ConRadius(ND_FiBwBranchHolder) + S_FiManAssembly - W_Fi;
    Fi_origin[1] - CapThickness(ND_FiBranchHolder) - S_FiManAssembly + L_Fi;
    Fi_origin[2] + H_FiBottomLayer + outerradius(ND_FiBwManBranch)
], [90; 0]*deg, ND_FiBranchHolder)
ArrayFiBranchHolder := Array_All(1, 2, W_Fi - 2*ConRadius(ND_FiBwBranchHolder) - 2*S_FiManAssembly)
FiManBranchRecThaw := ThawMultiple(["FiManPipePlu"; "FiManCapPlu"])
FiManPipeFrz := FreezeLayer("FiManPipePlu")
FiManCapFrz := FreezeLayer("FiManCapPlu")
FiManBranchRecFrz := FreezeMultiple(["FiManPipePlu"; "FiManCapPlu"])
FiBranchHolderScript := stack(LayerFiManPipe, FiBranchHolder, FiManPipeFrz, LayerFiManCaps, FiBranchHolderCapRight, FiBranchHolderCapLeft, FiManCapFrz, FiManBranchRecThaw, ArrayFiBranchHolder, FiManBranchRecFrz)
# Manifold Trunks
SelectFiManPipes := SelectLayer("FiManPipePlu")
FiTrunk := PipeF([
    FiBwInletCoupling_origin[0];
    Fi_origin[1] - L_FiManFerncoCoupling/2 + L_Fi;
    Fi_origin[2] + H_FiBottomLayer + outerradius(ND_FiBwManBranch)
], L_FiTrunk, [90; 0]*deg, ND_FiTrunk, PS_Default)
SelectFiManCaps := SelectLayer("FiManCapPlu")
FiTrunkCap := CapF([
    FiBwInletCoupling_origin[0];
    Fi_origin[1] - L_FiManFerncoCoupling/2 - L_FiTrunk + L_Fi;
    Fi_origin[2] + H_FiBottomLayer + outerradius(ND_FiBwManBranch)
], [-90; 0]*deg, ND_FiTrunk)
FiTrunkScript := stack(SelectFiManPipes, FiTrunk, FiManPipeFrz, SelectFiManCaps, FiTrunkCap, FiManCapFrz)
# Trunk and Branch Receiver Holes and Array
FiTrunkOrifice := CylinderF([
    Fi_origin[0] - S_FiManAssembly - ConRadius(ND_FiBwBranchHolder);
    Fi_origin[1] - L_FiManFerncoCoupling - B_FiManifoldBranch/2 + L_Fi;
    Fi_origin[2] + H_FiBottomLayer + outerradius(ND_FiBwManBranch)
], outerradius(ND_FiManBranch), W_Fi - 2*ConRadius(ND_FiBwBranchHolder) - 2*S_FiManAssembly, [0; 0]*deg)
ArrayFiTrunkOrifice := ArrayLast(N_FiManBranch/2, 1, -B_FiManifoldBranch)
SubtractFiManPipeOrifices := SubtractF(["FiManPipePlu"], "DeleteMe")
SubtractFiManCapOrifices := SubtractF(["FiManCapPlu"], "DeleteMe")
ArrayFiTrunks := array_all(N_FiLayer, 1, H_FiLayer)
FiManTrunkOrificeScript := stack(FiTrunkOrifice, ArrayFiTrunkOrifice, GroupDelete, SubtractFiManPipeOrifices, FiTrunkOrifice, ArrayFiTrunkOrifice, GroupDelete, SubtractFiManCapOrifices, SelectFiManPipes, SelectFiManCaps, view("f"), ArrayFiTrunks, view("t"), FiManPipeFrz, FiManCapFrz)
# Backwash Trunk
FiBwTrunk := PipeF([
    FiBwInletCoupling_origin[0];
    Fi_origin[1] - L_FiManFerncoCoupling/2 + L_Fi;
    Fi_origin[2] + outerradius(ND_FiBwManBranch)
], L_FiBwTrunk, [90; 0]*deg, ND_FiBwTrunk, PS_Default)
FiBwTrunkCap := CapF([
    FiBwInletCoupling_origin[0];
    Fi_origin[1] - L_FiManFerncoCoupling/2 - L_FiBwTrunk + L_Fi;
    Fi_origin[2] + outerradius(ND_FiBwManBranch)
], [-90; 0; 0]*deg, ND_FiBwTrunk)
FiBwManTrunkScript := stack(SelectFiManPipes, FiBwTrunk, FiManPipeFrz, SelectFiManCaps, FiBwTrunkCap, FiManCapFrz)
# Backwash Branch Receivers
FiBwBranchReceiver := PipeF([
    Fi_origin[0] + (ConRadius(ND_FiBwBranchHolder) + S_FiManAssembly) - W_Fi;
    Fi_origin[1] + CapThickness(ND_FiBwBranchHolder) + S_FiManAssembly;
    Fi_origin[2] + outerradius(ND_FiBwManBranch)
], L_Fi - 2*CapThickness(ND_FiBranchHolder) - 2*S_FiManAssembly, [-90; 0]*deg, ND_FiBwBranchHolder, PS_Default)
FiBwBranchReceiverCapR := CapF([
    Fi_origin[0] + (ConRadius(ND_FiBwBranchHolder) + S_FiManAssembly) - W_Fi;
    (Fi_origin[1] + CapThickness(ND_FiBwBranchHolder)) + S_FiManAssembly;
    Fi_origin[2] + outerradius(ND_FiBwManBranch)
], [-90; 0; 0]*deg, ND_FiBwBranchHolder)
FiBwBranchReceiverCapL := CapF([
    Fi_origin[0] + (ConRadius(ND_FiBwBranchHolder) + S_FiManAssembly) - W_Fi;
    Fi_origin[1] + L_Fi - S_FiManAssembly - CapThickness(ND_FiBwBranchHolder);
    Fi_origin[2] + outerradius(ND_FiBwManBranch)
], [90; 0; 0]*deg, ND_FiBwBranchHolder)
ArrayFiBwBranchHolder := ArrayLast(1, 2, W_Fi - 2*ConRadius(ND_FiBwBranchHolder) - 2*S_FiManAssembly)
FiBwBranchReceiverScript := stack(SelectFiManPipes, FiBwBranchReceiver, ArrayFiBwBranchHolder, FiManPipeFrz, SelectFiManCaps, FiBwBranchReceiverCapR, ArrayFiBwBranchHolder, FiBwBranchReceiverCapL, ArrayFiBwBranchHolder, FiManCapFrz)
# Backwash Trunk and Branch Receiver Orifices
FiBwTrunkOrifice := CylinderF([
    Fi_origin[0] - (ConRadius(ND_FiBwBranchHolder) + S_FiManAssembly);
    Fi_origin[1] - L_FiManFerncoCoupling - B_FiManifoldBranch/2 + L_Fi;
    Fi_origin[2] + outerradius(ND_FiBwManBranch)
], outerradius(ND_FiBwManBranch), W_Fi - 2*ConRadius(ND_FiBwBranchHolder) - 2*S_FiManAssembly, [0; 0]*deg)
FiBwTrunkOrificeScript := stack(FiBwTrunkOrifice, ArrayFiTrunkOrifice, GroupDelete, SubtractFiManPipeOrifices, FiBwTrunkOrifice, ArrayFiTrunkOrifice, GroupDelete, SubtractFiManCapOrifices)
# Filter Box Floor Cutouts
FiBwTrunkCutout := BoxF([
    Fi_origin[0] - (W_Fi/2 - ConRadius(ND_FiBwTrunk));
    Fi_origin[1];
    Fi_origin[2] - max(ConRadius(ND_FiBwTrunk), FerncoOuterDiameter(ND_FiBwTrunk)/2) + outerradius(ND_FiBwManBranch)
], [Fi_origin[0] - (W_Fi/2 + ConRadius(ND_FiBwTrunk)); Fi_origin[1] + L_Fi; Fi_origin[2]], [0; 0; 0]*deg)
FiBwBranchHolderCutout1 := BoxF([
    Fi_origin[0];
    Fi_origin[1];
    Fi_origin[2] - ConRadius(ND_FiBwBranchHolder) + outerradius(ND_FiBwManBranch)
], [
    Fi_origin[0] - (S_FiManAssembly + 2*ConRadius(ND_FiBwBranchHolder));
    Fi_origin[1] + L_Fi;
    Fi_origin[2]
], [0; 0; 0]*deg)
FiBwBranchHolderCutout2 := BoxF([
    Fi_origin[0] - W_Fi;
    Fi_origin[1];
    Fi_origin[2] - ConRadius(ND_FiBwBranchHolder) + outerradius(ND_FiBwManBranch)
], [
    Fi_origin[0] - W_Fi + 2*ConRadius(ND_FiBwBranchHolder) + S_FiManAssembly;
    Fi_origin[1] + L_Fi;
    Fi_origin[2]
], [0; 0; 0]*deg)
SubtractBwTrunkCutouts := SubtractF(["FiTankCon"], "DeleteMe")
FiBoxFloorCutoutScript := stack(FiBwTrunkCutout, FiBwBranchHolderCutout1, FiBwBranchHolderCutout2, GroupDelete, SubtractBwTrunkCutouts)
FiTrunkReceiverScript := stack(FiBranchHolderScript, FiTrunkScript, FiManTrunkOrificeScript, FiBwManTrunkScript, FiBwBranchReceiverScript, FiBwTrunkOrificeScript, FiBoxFloorCutoutScript)
# Manifold Branches
LayerMan := layer_new("FiManBranchPlu", blue3)
FiManBranch := PipeF(Fi_origin + [
    -S_FiManAssembly - ConRadius(ND_FiBwBranchHolder) - outerradius(ND_FiBranchHolder) + L_FiManBranchExt;
    -L_FiManFerncoCoupling - B_FiManifoldBranch/2 + L_Fi;
    outerradius(ND_FiBwManBranch) + H_FiBottomLayer
], L_FiManBranch, [0; 0]*deg, ND_FiManBranch, PS_FiBranch)
FreezeFiManLayer := FreezeLayer("FiManBranchPlu")
FiManBranchSlot := BoxF(Fi_origin + [
    -S_FiManAssembly - ConRadius(ND_FiBwBranchHolder) - outerradius(ND_FiBranchHolder) - B_FiManSlot/2;
    -L_FiManFerncoCoupling - B_FiManifoldBranch/2 - outerradius(ND_FiManBranch);
    outerradius(ND_FiBwManBranch) + H_FiBottomLayer + H_FiManCenterToSlot
], Fi_origin + [
    -(S_FiManAssembly + ConRadius(ND_FiBwBranchHolder) + outerradius(ND_FiBranchHolder) + B_FiManSlot/2 + W_FiManSlots);
    -L_FiManFerncoCoupling - B_FiManifoldBranch/2 + outerradius(ND_FiManBranch);
    outerradius(ND_FiBwManBranch) + H_FiBottomLayer + outerradius(ND_FiManBranch)
], [90; 0; 0]*deg)
MirrorFiManBranchSlot := MirrorLast([Fi_origin[0] + 0 m; Fi_origin[2] + outerradius(ND_FiBwManBranch) + H_FiBottomLayer], [Fi_origin[0] + zc; Fi_origin[2] + outerradius(ND_FiBwManBranch) + H_FiBottomLayer], "N")
ArrayFiManBranchSlot := array_all(1, N_FiManSlotsPerRow, B_FiManSlot)
SubtractFiManSlots := SubtractF(["FiManBranchPlu"], "DeleteMe")
SelectFiManBranch := SelectLayer("FiManBranchPlu")
ArrayFiMan := array_all(N_FiLayer, 1, H_FiLayer)
# Do not stack unless you are drawing only the slotted pipes. The slots make the 3D model unmanagable.
FiBranchScriptSlots := stack(LayerMan, FiManBranch, FreezeFiManLayer, FiManBranchSlot, view("r"), MirrorFiManBranchSlot, view("t"), ArrayFiManBranchSlot, GroupDelete, SubtractFiManSlots, SelectFiManBranch, BrepAll, view("f"), ArrayFiMan, view("t"))
FiBranchScript := stack(LayerMan, FiManBranch, view("f"), ArrayFiMan, view("t"))
BwManBranch := PipeF(Fi_origin + [
    -(S_FiManAssembly + ConRadius(ND_FiBwBranchHolder) + outerradius(ND_FiBwBranchHolder) - L_FiManBranchExt);
    -L_FiManFerncoCoupling - B_FiManifoldBranch/2 + L_Fi;
    outerradius(ND_FiBwManBranch)
], L_FiBwManBranch, [0; 0]*deg, ND_FiBwManBranch, PS_FiBranch)
FiBwManBranchSlot := BoxF(Fi_origin + [
    -(S_FiManAssembly + ConRadius(ND_FiBwBranchHolder) + outerradius(ND_FiBwBranchHolder) + B_FiBwManSlot/2);
    -L_FiManFerncoCoupling - B_FiManifoldBranch/2 - outerradius(ND_FiBwManBranch);
    outerradius(ND_FiBwManBranch) + H_FiBwManCenterToSlot
], Fi_origin + [
    -(S_FiManAssembly + ConRadius(ND_FiBwBranchHolder) + outerradius(ND_FiBwBranchHolder) + B_FiBwManSlot/2 + W_FiManSlots);
    -L_FiManFerncoCoupling - B_FiManifoldBranch/2 + outerradius(ND_FiBwManBranch);
    outerdiameter(ND_FiBwManBranch)
], [90; 0; 0]*deg)
ArrayFiBwManBranchSlot := ArrayLast(1, N_FiBwManSlotsPerRow, B_FiBwManSlot)
MirrorFiManBranches := Mirror3dAll("yz", [Fi_origin[0] - W_Fi/2; Fi_origin[1]], "n")
ArrayManBranches := array_all(N_FiManBranch/2, 1, -B_FiManifoldBranch)
# Do not stack unless you are drawing only the slotted pipes. The slots make the 3D model unmanagable.
FiBwBranchScriptSlots := stack(BwManBranch, FreezeFiManLayer, FiBwManBranchSlot, ArrayFiBwManBranchSlot, GroupDelete, SubtractFiManSlots, SelectFiManBranch, BrepAll, ArrayManBranches, MirrorFiManBranches, FreezeFiManLayer)
FiBwBranchScript := stack(BwManBranch, ArrayManBranches, MirrorFiManBranches, FreezeFiManLayer)
FiManBranchScript := stack(FiBranchScript, FiBwBranchScript)
FiManifoldScript := stack(FiManWallScript, FiTrunkReceiverScript, FiManBranchScript)
# Auxiliary Box Concrete
# Entrance and Exit Boxes
LayerFiEntExitBox := layer_new("FiCon", grey)
FiEntBox := Tank(FiEntranceBox_origin, FiEntranceBox_dim, T_PlantWall)
FiExitBox := Tank(FiExitBox_origin, FiExitBox_dim, T_PlantWall)
LayerFiEntExitBoxFrz := FreezeLayer("FiCon")
# Overflow and Distribution Boxes
LayerFiOFDistBox := layer_new("FiOFDistCon", grey)
FiDistBox := Tank(FiDistBox_Origin, FiDistBox_Dim, T_PlantWall)
FiOverflowBox := Tank(FiOverflowBox_Origin, FiOverflowBox_Dim, T_PlantWall)
FiOverflowBoxBase := BoxF(FiOverflowBox_Origin + [T_PlantWall; 0; -T_PlantWall], [
    FiOverflowBox_Origin[0] - FiOverflowBox_Dim[0] - T_PlantWall;
    FiOverflowBox_Origin[1] + FiOverflowBox_Dim[1] + T_PlantWall;
    FiEntranceBox_origin[2] - T_PlantWall
], [0; 0; 0]*deg)
LayerFiOFDistBoxFrz := FreezeLayer("FiOFDistCon")
# Entrance Box Air Removal
FiAirRemovalBlockSlot := BoxF([
    FiEntranceBox_origin[0] - T_ConcreteMin - W_FiEntrance;
    FiEntranceBox_origin[1] - S_FiEntranceBaffle - T_SedWeir - S_FiBaffleToBlock + L_FiEntrance;
    Z_FiAirRemovalBlockBottom
], [
    FiEntranceBox_origin[0] + T_ConcreteMin;
    FiEntranceBox_origin[1] - S_FiEntranceBaffle - T_SedWeir - S_FiBaffleToBlock + L_FiEntrance;
    Z_FiEntranceBottom + H_FiEntrance
] - [0; W_FiAirRemovalBlock; 0], [0; 0; 0])
FiBaffle := BoxF([
    FiEntranceBox_origin[0] - T_ConcreteMin - W_FiEntrance;
    FiEntranceBox_origin[1] + L_FiEntrance;
    Z_FiEntranceBottom
] + [0 m; -S_FiEntranceBaffle; S_FiEntranceBaffle], [FiEntranceBox_origin[0]; FiEntranceBox_origin[1] + L_FiEntrance; Z_FiEntranceBottom] + [T_ConcreteMin; -S_FiEntranceBaffle - T_SedWeir; H_FiEntrance], [0; 0; 0])
FiSubtractBaffleEntSlots := SubtractF(["FiCon"], "DeleteMe")
FiSubtractBaffleOverflowSlots := SubtractF(["FiOFDistCon"], "DeleteMe")
ArrayFiBaffleSlots := array_all(1, 2, W_FiEntrance + W_FiOverflow + 2*T_ChannelWall)
FiBaffleSlots :=
    stack(FiAirRemovalBlockSlot, FiBaffle, GroupDelete, FiSubtractBaffleEntSlots, FiAirRemovalBlockSlot, FiBaffle, GroupDelete, FiSubtractBaffleOverflowSlots) if N_Fi == 1
    stack(FiAirRemovalBlockSlot, FiBaffle, GroupDelete, FiSubtractBaffleEntSlots, FiAirRemovalBlockSlot, FiBaffle, ArrayFiBaffleSlots, GroupDelete, FiSubtractBaffleOverflowSlots) otherwise
FiBaffleLayer := layer_new("FiBaffles", ltgrey)
FiAirRemovalBlock := BoxF([
    FiEntranceBox_origin[0] - (T_ConcreteMin + W_FiEntrance);
    FiEntranceBox_origin[1] - S_FiEntranceBaffle - T_SedWeir - S_FiBaffleToBlock + L_FiEntrance;
    Z_FiAirRemovalBlockBottom
], [
    FiEntranceBox_origin[0] + T_ConcreteMin;
    FiEntranceBox_origin[1] - S_FiEntranceBaffle - 2*T_SedWeir - S_FiBaffleToBlock + L_FiEntrance;
    Z_FiAirRemovalBlockTop
], [0; 0; 0])
FiBaffleLayerFrz := FreezeLayer("FiBaffles")
FiBaffles := stack(FiBaffleLayer, FiBaffle, FiAirRemovalBlock, FiBaffleLayerFrz)
FiAuxBoxScript := stack(LayerFiEntExitBox, FiEntBox, FiExitBox, Union_All, LayerFiEntExitBoxFrz, LayerFiOFDistBox, FiDistBox, FiOverflowBox, FiOverflowBoxBase, LayerFiOFDistBoxFrz, FiBaffleSlots, FiBaffles)
# Auxiliary Box Plumbing (not filter entrance or exit)
Z_FiOverflowVertDrainPipeStart := Z_FiOverflowBottom - CouplingLength(ND_FiEntOverflow) + SocketDepth(ND_FiEntOverflow) = 1.2376 m
Z_FiOverflowVertDrainPipeEnd := Z_FiOverflowBottom - H_FiEntOverflowDrop + ElbowRadius(ND_FiEntOverflow) = 0.805994 m
Y_FiOverflowHorizDrainPipeStart := FiInletChannel_Origin[1] + W_FiInletChannel + T_PlantWall - CouplingLength(ND_FiEntOverflow) + SocketDepth(ND_FiEntOverflow)
Y_FiOverflowHorizDrainPipeEnd := FiEntranceBox_origin[1] + L_FiEntrance/2 + ElbowRadius(ND_FiEntOverflow)
# Auxiliary Fittings
FiAuxFittingLayer := layer_new("FiAuxFittingPlu", green)
FiAuxRemovableLayer := layer_new("FiAuxRemovablePlu", red)
SelectFiAuxRemovables := SelectLayer("FiAuxRemovablePlu")
FiBypassCoupling := CouplingSUBF([
    FiEntranceBox_origin[0] + T_ChannelWall + W_FiOverflow/2;
    FiExitBox_origin[1] + CouplingLength(ND_FiBypass) - SocketDepth(ND_FiBypass) + L_FiExit;
    Z_FiTop - S_Fitting - ConRadius(ND_FiBypass)
], [90; 0]*deg, ND_FiBypass, PS_Default, ["FiConOFDist"])
FiBypassCap := CapF([
    FiEntranceBox_origin[0] + T_ChannelWall + W_FiOverflow/2;
    FiExitBox_origin[1] + CouplingLength(ND_FiBypass) + CapHeight(ND_FiBypass) - CapThickness(ND_FiBypass) + L_FiExit;
    Z_FiTop - S_Fitting - ConRadius(ND_FiBypass)
], [90; 0; 0]*deg, ND_FiBypass)
FiOverflowBoxCoupling := CouplingSUBF([
    FiEntranceBox_origin[0] + T_ChannelWall + W_FiOverflow/2;
    FiEntranceBox_origin[1] + L_FiEntrance/2;
    Z_FiOverflowVertDrainPipeStart
], [0; 90]*deg, ND_FiEntOverflow, PS_Default, ["FiConOFDist"])
FiAuxFittingFrz := FreezeLayer("FiAuxFittingPlu")
FiAuxRemovableFrz := FreezeLayer("FiAuxRemovablePlu")
FiAuxFittingScript := stack(FiAuxFittingLayer, FiBypassCoupling, FiOverflowBoxCoupling, FiAuxFittingFrz, FiAuxRemovableLayer, FiBypassCap, FiAuxRemovableFrz)
# Distribution Plumbing Start
FiDistFittingLayer := layer_new("FiDistFittingPlu", green)
FiDistCoupling := CouplingSUBF([
    FiEntranceBox_origin[0] + T_ChannelWall + W_FiOverflow/2;
    FiExitBox_origin[1] + L_FiExit/2;
    Z_FiExitBottom - SocketDepth(ND_DistPipe)
], [0; 270]*deg, ND_DistPipe, PS_Default, ["FiConOFDist"])
FiDistElbow1 := ElbowF([
    FiEntranceBox_origin[0] + T_ChannelWall + W_FiOverflow/2;
    FiExitBox_origin[1] + L_FiExit/2;
    Z_FiDistPipe + ElbowRadius(ND_DistPipe)
], [0; -90; 270]*deg, ND_DistPipe, PS_Default)
FiDistFittingFrz := FreezeLayer("FiDistFittingPlu")
FiDistPipeLayer := layer_new("FiDistPipePlu", blue)
L_FiDistPipe1 := Z_FiExitBottom - CouplingLength(ND_DistPipe) + SocketDepth(ND_DistPipe) - (Z_FiDistPipe + ElbowRadius(ND_DistPipe))
FiDistPipe1 := PipeSUBF([
    FiEntranceBox_origin[0] + T_ChannelWall + W_FiOverflow/2;
    FiExitBox_origin[1] + L_FiExit/2;
    Z_FiExitBottom - CouplingLength(ND_DistPipe) + SocketDepth(ND_DistPipe)
], L_FiDistPipe1, [0; 270; 0]*deg, ND_DistPipe, PS_Default, ["FiConOFDist"])
FiDistPipeFrz := FreezeLayer("FiDistPipePlu")
FiDistStartScript := stack(FiDistFittingLayer, FiDistCoupling, FiDistElbow1, FiDistFittingFrz, FiDistPipeLayer, FiDistPipe1, FiDistPipeFrz)
# Auxiliary Pipes
FiAuxPipeLayer := layer_new("FiAuxPipePlu", blue)
FiBypassPipe1Horiz := PipeF([
    FiEntranceBox_origin[0] + T_ChannelWall + W_FiOverflow/2;
    FiExitBox_origin[1] + CouplingLength(ND_FiBypass) + CapHeight(ND_FiBypass) - CapThickness(ND_FiBypass) + L_FiExit;
    Z_FiTop - S_Fitting - ConRadius(ND_FiBypass)
], CapHeight(ND_FiBypass) - CapThickness(ND_FiBypass) + SocketDepth(ND_FiBypass), [90; 0; 0]*deg, ND_FiBypass, PS_Default)
FiOverflowDrainPipeVert := PipeSUBF([
    FiEntranceBox_origin[0] + T_ChannelWall + W_FiOverflow/2;
    FiEntranceBox_origin[1] + L_FiEntrance/2;
    Z_FiOverflowVertDrainPipeStart
], Z_FiOverflowVertDrainPipeStart - Z_FiOverflowVertDrainPipeEnd, [0; 270]*deg, ND_FiEntOverflow, PS_Default, ["FiConOFDist"])
LayerFiAuxPipeFrz := FreezeLayer("FiAuxPipePlu")
FiAuxPipeScript := stack(FiAuxPipeLayer, FiOverflowDrainPipeVert, LayerFiAuxPipeFrz, SelectFiAuxRemovables, FiBypassPipe1Horiz, FiAuxRemovableFrz)
FiAuxPlumbingScript := stack(FiAuxFittingScript, FiDistStartScript, FiAuxPipeScript)
# Entrance and Exit Plumbing Until Filter Wall Coupling
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# This is all of the piping between filter box, entrance and exit
# In means the pipe goes IN TO THE FILTER
# Out means it comes OUT OF THE FILTER
SelectFiPipeLayer := SelectLayer("FiPipePlu")
SelectFiFittingLayer := SelectLayer("FiFittingsPlu")
# Inlet 0 Pipes (backwash)
Z_FiInPipe0aStart := FiEntranceBox_origin[2] - CouplingLength(ND_FiBwTrunk) + SocketDepth(ND_FiBwTrunk)
Z_FiInPipe0aEnd := Fi_origin[2] + outerradius(ND_FiBwManBranch) + ShortTeeLength(ND_FiBwTrunk)
L_FiInPipe0a := FiBwInletCoupling_origin[2] - Z_FiInPipe0aEnd = 3.27644 m
FiInPipe0a := PipeSUBF(FiBwInletCoupling_origin, L_FiInPipe0a, [0; 270]*deg, ND_FiBwTrunk, PS_Default, ["FiCon"])
X_FiBwTrunkPipeEnd := Fi_origin[1] + L_Fi + T_FiWall + CouplingLength(ND_FiBwTrunk) - SocketDepth(ND_FiBwTrunk)
L_FiInPipe0b := FiBwInletCoupling_origin[1] - TeeLength(ND_FiBwTrunk)/2 - X_FiBwTrunkPipeEnd = 2.08636 m
FiInPipe0b := PipeF([
    FiBwInletCoupling_origin[0];
    FiBwInletCoupling_origin[1] - ShortTeeLength(ND_FiBwTrunk);
    Z_FiInPipe0aEnd - ShortTeeLength(ND_FiBwTrunk)
], L_FiInPipe0b, [90; 0]*deg, ND_FiBwTrunk, PS_Default)
FiIn0PipeScript := stack(FiInPipe0a, FiInPipe0b)
# Inlet 0 Fittings (backwash)
FiEntBoxCoupling0 := CouplingSUBF(FiBwInletCoupling_origin, [0; 90]*deg, ND_FiBwTrunk, PS_Default, ["FiConEntExit"])
FiInTee0a := TeeF([FiBwInletCoupling_origin[0]; FiBwInletCoupling_origin[1]; Z_FiInPipe0aEnd], [0; 90; 90]*deg, ND_FiBwTrunk, PS_Default)
FiInReducerLarge := CylinderF([
    FiBwInletCoupling_origin[0];
    FiBwInletCoupling_origin[1] + ShortTeeLength(ND_FiBwTrunk) + 10 cm;
    Z_FiInPipe0aEnd - ShortTeeLength(ND_FiBwTrunk)
], innerdiameter(ND_FiBwTrunk, PS_Default)/2, 10 cm, [90; 0]*deg)
FiInReducerSmall := CylinderF([
    FiBwInletCoupling_origin[0];
    FiBwInletCoupling_origin[1] + ShortTeeLength(ND_FiBwTrunk) + 2*10*cm;
    Z_FiInPipe0aEnd - ShortTeeLength(ND_FiBwTrunk)
], innerdiameter(3 in, PS_Default)/2, 10 cm, [90; 0]*deg)
FiValveLayer := layer_new("FiValvePlu", blue3)
# The valve length and socket functions are not returning the correct numbers, so for now, I am arbitrarily setting the valve over by 60% of its length as returned by the function
FiInValve := insertdwg("https://confluence.cornell.edu/download/attachments/173604905/Fi-Scaled-Gate-Valve-Threaded.dwg", [
    FiBwInletCoupling_origin[0];
    FiBwInletCoupling_origin[1] + ShortTeeLength(ND_FiBwTrunk) + 2*10*cm + 0.6*ValveLength(3 in);
    Z_FiInPipe0aEnd - ShortTeeLength(ND_FiBwTrunk)
], 3 in/(1.16 m), 3 in/(1.16 m), 90 deg)
LayerFiValveFrz := FreezeLayer("FiValvePlu")
FiIn0FittingScript := stack(FiEntBoxCoupling0, FiInTee0a, FiInReducerLarge, FiInReducerSmall, LayerFiFittingFrz, FiValveLayer, FiInValve, LayerFiValveFrz, SelectFiFittingLayer)
# Inlet 1 Pipes
Z_FiInPipe1aEnd := Fi_origin[2] + outerradius(ND_FiBwManBranch) + H_FiBottomLayer + H_FiLayer + ElbowRadius(ND_FiTrunk)
L_FiInPipe1a := FiInletCoupling1_origin[2] - Z_FiInPipe1aEnd
FiInPipe1a := PipeSUBF(FiInletCoupling1_origin, L_FiInPipe1a, [0; 270]*deg, ND_FiTrunk, PS_Default, ["FiConEntExit"])
X_FiTrunkPipeEnd := Fi_origin[1] + L_Fi + T_FiWall + CouplingLength(ND_FiTrunk) - SocketDepth(ND_FiTrunk)
L_FiInPipe1b := FiInletCoupling1_origin[1] - ElbowRadius(ND_FiTrunk) - X_FiTrunkPipeEnd
FiInPipe1b := PipeF([
    FiInletCoupling1_origin[0];
    FiInletCoupling1_origin[1] - ElbowRadius(ND_FiTrunk);
    Z_FiInPipe1aEnd - ElbowRadius(ND_FiTrunk)
], L_FiInPipe1b, [90; 0]*deg, ND_FiTrunk, PS_Default)
FiIn1PipeScript := stack(FiInPipe1a, FiInPipe1b)
# Inlet 1 Fittings
FiEntBoxCoupling1 := CouplingSUBF(FiInletCoupling1_origin, [0; 90]*deg, ND_FiTrunk, PS_Default, ["FiCon"])
FiInElbow1a := ElbowF([FiInletCoupling1_origin[0]; FiInletCoupling1_origin[1]; Z_FiInPipe1aEnd], [0; -90; -90]*deg, ND_FiTrunk, PS_Default)
FiIn1FittingScript := stack(FiEntBoxCoupling1, FiInElbow1a)
# Inlet 2 Pipes
Z_FiInPipe2aEnd := Z_FiInPipe1aEnd + 2*H_FiLayer
Y_FiInPipe2bEnd := FiExitCoupling1_origin[1] - ConRadius(ND_FiTrunk) - T_ConcreteMin  # Gives 5 cm of clearance plus the elbow radius
L_FiInPipe2a := FiInletCoupling2_origin[2] - Z_FiInPipe2aEnd
L_FiInPipe2b := FiInletCoupling2_origin[1] - ElbowRadius(ND_FiTrunk) - Y_FiInPipe2bEnd = 0.9842 m
FiInPipe2a := PipeSUBF(FiInletCoupling2_origin, L_FiInPipe2a, [0; 270]*deg, ND_FiTrunk, PS_Default, ["FiConEntExit"])
FiInPipe2b := PipeF([
    FiInletCoupling2_origin[0];
    FiInletCoupling2_origin[1] - ElbowRadius(ND_FiTrunk);
    Z_FiInPipe2aEnd - ElbowRadius(ND_FiTrunk)
], L_FiInPipe2b, [90; 0]*deg, ND_FiTrunk, PS_Default)
X_FiInPipe2cEnd := Fi_origin[0] - W_Fi/2 + ElbowRadius(ND_FiTrunk)
L_FiInPipe2c := X_FiInPipe2cEnd - (FiInletCoupling2_origin[0] - ElbowRadius(ND_FiTrunk)) = -0.302805 m
L_FiInPipe2d := Y_FiInPipe2bEnd - 2*ElbowRadius(ND_FiTrunk) - X_FiTrunkPipeEnd = 0.854725 m
FiInPipe2c := PipeF([
    FiInletCoupling2_origin[0] - ElbowRadius(ND_FiTrunk);
    Y_FiInPipe2bEnd - ElbowRadius(ND_FiTrunk);
    Z_FiInPipe2aEnd - ElbowRadius(ND_FiTrunk)
], L_FiInPipe2c, [180; 0]*deg, ND_FiTrunk, PS_Default)
FiInPipe2d := PipeF([
    X_FiInPipe2cEnd - ElbowRadius(ND_FiTrunk);
    Y_FiInPipe2bEnd - 2*ElbowRadius(ND_FiTrunk);
    Z_FiInPipe2aEnd - ElbowRadius(ND_FiTrunk)
], L_FiInPipe2d, [90; 0]*deg, ND_FiTrunk, PS_Default)
FiIn2PipeScript := stack(FiInPipe2a, FiInPipe2b, FiInPipe2c, FiInPipe2d)
# Inlet 2 Fittings
FiEntBoxCoupling2 := CouplingSUBF(FiInletCoupling2_origin, [0; 90]*deg, ND_FiTrunk, PS_Default, ["FiCon"])
FiInElbow2a := ElbowF([FiInletCoupling2_origin[0]; FiInletCoupling2_origin[1]; Z_FiInPipe2aEnd], [0; -90; -90]*deg, ND_FiTrunk, PS_Default)
FiInElbow2b := ElbowF([FiInletCoupling2_origin[0]; Y_FiInPipe2bEnd; Z_FiInPipe2aEnd - ElbowRadius(ND_FiTrunk)], [180; 180; 0]*deg, ND_FiTrunk, PS_Default)
FiInElbow2c := ElbowF([
    X_FiInPipe2cEnd;
    Y_FiInPipe2bEnd - ElbowRadius(ND_FiTrunk);
    Z_FiInPipe2aEnd - ElbowRadius(ND_FiTrunk)
], [90; 0; 0]*deg, ND_FiTrunk, PS_Default)
FiIn2FittingScript := stack(FiEntBoxCoupling2, FiInElbow2a, FiInElbow2b, FiInElbow2c)
# Inlet 3 Pipes
Z_FiInPipe3aEnd := Z_FiInPipe2aEnd + 2*H_FiLayer
L_FiInPipe3a := FiInletCoupling3_origin[2] - Z_FiInPipe3aEnd
FiInPipe3a := PipeSUBF(FiInletCoupling3_origin, FiInletCoupling3_origin[2] - Z_FiInPipe3aEnd, [0; 270]*deg, ND_FiTrunk, PS_Default, ["FiConEntExit"])
Y_FiInPipe3bEnd := Y_FiInPipe2bEnd
L_FiInPipe3b := FiInletCoupling3_origin[1] - ElbowRadius(ND_FiTrunk) - Y_FiInPipe3bEnd
FiInPipe3b := PipeF([
    FiInletCoupling3_origin[0];
    FiInletCoupling3_origin[1] - ElbowRadius(ND_FiTrunk);
    Z_FiInPipe3aEnd - ElbowRadius(ND_FiTrunk)
], L_FiInPipe3b, [90; 0]*deg, ND_FiTrunk, PS_Default)
X_FiInPipe3cEnd := X_FiInPipe2cEnd
L_FiInPipe3c := X_FiInPipe3cEnd - (FiInletCoupling3_origin[0] - ElbowRadius(ND_FiTrunk))
L_FiInPipe3d := Y_FiInPipe3bEnd - 2*ElbowRadius(ND_FiTrunk) - X_FiTrunkPipeEnd
FiInPipe3c := PipeF([
    FiInletCoupling3_origin[0] - ElbowRadius(ND_FiTrunk);
    Y_FiInPipe3bEnd - ElbowRadius(ND_FiTrunk);
    Z_FiInPipe3aEnd - ElbowRadius(ND_FiTrunk)
], L_FiInPipe3c, [180; 0]*deg, ND_FiTrunk, PS_Default)
FiInPipe3d := PipeF([
    X_FiInPipe3cEnd - ElbowRadius(ND_FiTrunk);
    Y_FiInPipe3bEnd - 2*ElbowRadius(ND_FiTrunk);
    Z_FiInPipe3aEnd - ElbowRadius(ND_FiTrunk)
], L_FiInPipe3d, [90; 0]*deg, ND_FiTrunk, PS_Default)
FiIn3PipeScript := stack(FiInPipe3a, FiInPipe3b, FiInPipe3c, FiInPipe3d)
# Inlet 3 Fittings
FiEntBoxCoupling3 := CouplingSUBF(FiInletCoupling3_origin, [0; 90]*deg, ND_FiTrunk, PS_Default, ["FiCon"])
FiInElbow3a := ElbowF([FiInletCoupling3_origin[0]; FiInletCoupling3_origin[1]; Z_FiInPipe3aEnd], [0; -90; -90]*deg, ND_FiTrunk, PS_Default)
FiInElbow3b := ElbowF([FiInletCoupling3_origin[0]; Y_FiInPipe3bEnd; Z_FiInPipe3aEnd - ElbowRadius(ND_FiTrunk)], [180; 180; 0]*deg, ND_FiTrunk, PS_Default)
FiInElbow3c := ElbowF([
    X_FiInPipe3cEnd;
    Y_FiInPipe3bEnd - ElbowRadius(ND_FiTrunk);
    Z_FiInPipe3aEnd - ElbowRadius(ND_FiTrunk)
], [90; 0; 0]*deg, ND_FiTrunk, PS_Default)
FiIn3FittingScript := stack(FiEntBoxCoupling3, FiInElbow3a, FiInElbow3b, FiInElbow3c)
# Outlet 0 Pipes
Z_FiOutPipe0aEnd := Z_FiInPipe1aEnd + H_FiLayer
L_FiOutPipe0a := FiExitCoupling0_origin[2] - Z_FiOutPipe0aEnd
L_FiOutPipe0b := FiExitCoupling0_origin[1] - ElbowRadius(ND_FiTrunk) - X_FiTrunkPipeEnd
FiOutPipe0a := PipeSUBF(FiExitCoupling0_origin, FiExitCoupling0_origin[2] - Z_FiOutPipe0aEnd, [0; -90]*deg, ND_FiTrunk, PS_Default, ["FiConEntExit"])
FiOutPipe0b := PipeF([
    FiExitCoupling0_origin[0];
    FiExitCoupling0_origin[1] - ElbowRadius(ND_FiTrunk);
    Z_FiOutPipe0aEnd - ElbowRadius(ND_FiTrunk)
], L_FiOutPipe0b, [90; 0]*deg, ND_FiTrunk, PS_Default)
FiOut0PipeScript := stack(FiOutPipe0a, FiOutPipe0b)
# Outlet 0 Fittings
FiExChanCoupling0 := CouplingSUBF(FiExitCoupling0_origin, [0; 90]*deg, ND_FiTrunk, PS_Default, ["FiCon"])
FiOutElbow0a := ElbowF([FiExitCoupling0_origin[0]; FiExitCoupling0_origin[1]; Z_FiOutPipe0aEnd], [0; -90; -90]*deg, ND_FiTrunk, PS_Default)
FiOut0FittingScript := stack(FiExChanCoupling0, FiOutElbow0a)
# Outlet 1 Pipes
Z_FiOutPipe1aEnd := Z_FiOutPipe0aEnd + 2*H_FiLayer
L_FiOutPipe1a := FiExitCoupling1_origin[2] - Z_FiOutPipe1aEnd
L_FiOutPipe1b := FiExitCoupling1_origin[1] - ElbowRadius(ND_FiTrunk) - X_FiTrunkPipeEnd
FiOutPipe1a := PipeSUBF(FiExitCoupling1_origin, L_FiOutPipe1a, [0; -90]*deg, ND_FiTrunk, PS_Default, ["FiConEntExit"])
FiOutPipe1b := PipeF([
    FiExitCoupling1_origin[0];
    FiExitCoupling1_origin[1] - ElbowRadius(ND_FiTrunk);
    Z_FiOutPipe1aEnd - ElbowRadius(ND_FiTrunk)
], L_FiOutPipe1b, [90; 0]*deg, ND_FiTrunk, PS_Default)
FiOut1PipeScript := stack(FiOutPipe1a, FiOutPipe1b)
# Outlet 1 Fittings
FiExChanCoupling1 := CouplingSUBF(FiExitCoupling1_origin, [0; 90]*deg, ND_FiTrunk, PS_Default, ["FiCon"])
FiOutElbow1a := ElbowF([FiExitCoupling1_origin[0]; FiExitCoupling1_origin[1]; Z_FiOutPipe1aEnd], [0; -90; -90]*deg, ND_FiTrunk, PS_Default)
FiOut1FittingScript := stack(FiExChanCoupling1, FiOutElbow1a)
# Outlet 2 Pipes (exit box drain)
Z_FiExitDrainOutlet := Z_FiExitBottom - H_FiExitWasteDrop
Y_FiExitHorizDrainPipeStart := FiInletChannel_Origin[1] + W_FiInletChannel + T_PlantWall - CouplingLength(ND_FiExitWaste) + SocketDepth(ND_FiExitWaste)
Y_FiExitHorizDrainPipeEnd := FiExitCoupling3_origin[1] + ElbowRadius(ND_FiExitWaste)
L_FiOutPipe2a := FiExitCoupling3_origin[2] - Z_FiExitDrainOutlet - ElbowRadius(ND_FiExitWaste)
FiOutPipe2a := PipeSUBF(FiExitCoupling3_origin, L_FiOutPipe2a, [0; -90]*deg, ND_FiExitWaste, PS_Default, ["FiConEntExit"])
FiOut2PipeScript := FiOutPipe2a
# Oulet 2 Fittings (exit box drain)
FiExChanCoupling2 := CouplingSUBF(FiExitCoupling3_origin, [0; 90]*deg, ND_FiExitWaste, PS_Default, ["FiConEntExit"])
FiOutElbow2a := ElbowF([
    FiExitCoupling3_origin[0];
    FiExitCoupling3_origin[1];
    Z_FiExitDrainOutlet + ElbowRadius(ND_FiExitWaste)
], [0; 90; 270]*deg, ND_FiExitWaste, PS_Default)
FiOut2FittingScript := stack(FiExChanCoupling2, FiOutElbow2a)
# Outlet 3 Pipes
L_FiOut3PipeZ := FiExitCoupling2_origin[2] - (Fi_origin[2] + outerradius(ND_FiBwManBranch) + H_FiBottomLayer + ElbowRadius(ND_FiTrunk))
L_FiOut3PipeY := FiExitCoupling2_origin[1] - (Fi_origin[1] + L_Fi + T_FiWall + CouplingLength(ND_FiTrunk) - SocketDepth(ND_FiTrunk)) - ElbowRadius(ND_FiTrunk) = 1.2254 m
L_FiOut3PipeX := FiExitCoupling0_origin[0] - FiExitCoupling2_origin[0] + 2*ElbowRadius(ND_FiTrunk) = -0.536955 m
FiOut3PipeZ := PipeSUBF([
    FiExitCoupling2_origin[0];
    FiExitCoupling2_origin[1];
    Fi_origin[2] + outerradius(ND_FiBwManBranch) + H_FiBottomLayer + ElbowRadius(ND_FiTrunk)
], L_FiOut3PipeZ, [0; 90]*deg, ND_FiTrunk, PS_Default, ["FiConEntExit"])
FiOut3PipeX := PipeF([
    FiExitCoupling2_origin[0] - ElbowRadius(ND_FiTrunk);
    FiExitCoupling2_origin[1];
    Fi_origin[2] + outerradius(ND_FiBwManBranch) + H_FiBottomLayer
], L_FiOut3PipeX, [180; 0]*deg, ND_FiTrunk, PS_Default)
FiOut3PipeY := PipeF([
    FiExitCoupling2_origin[0] - 2*ElbowRadius(ND_FiTrunk) + L_FiOut3PipeX;
    FiExitCoupling2_origin[1] - ElbowRadius(ND_FiTrunk);
    Fi_origin[2] + outerradius(ND_FiBwManBranch) + H_FiBottomLayer
], L_FiOut3PipeY, [90; 0]*deg, ND_FiTrunk, PS_Default)
FiOut3PipeScript := stack(FiOut3PipeZ, FiOut3PipeX, FiOut3PipeY)
# Outlet 3 Fittings
FiExChanCoupling3 := CouplingSUBF(FiExitCoupling2_origin, [0; 90]*deg, ND_FiTrunk, PS_Default, ["FiCon"])
FiOut3ElbowXZ := ElbowF([
    FiExitCoupling2_origin[0];
    FiExitCoupling2_origin[1];
    (Fi_origin[2] + outerradius(ND_FiBwManBranch) + H_FiBottomLayer) + ElbowRadius(ND_FiTrunk)
], [0; 0; -90]*deg, ND_FiTrunk, PS_Default)
FiOut3ElbowXY := ElbowF([
    FiExitCoupling2_origin[0] - ElbowRadius(ND_FiTrunk) + L_FiOut3PipeX;
    FiExitCoupling2_origin[1];
    Fi_origin[2] + outerradius(ND_FiBwManBranch) + H_FiBottomLayer
], [90; 0; 0]*deg, ND_FiTrunk, PS_Default)
FiOut3FittingScript := stack(FiExChanCoupling3, FiOut3ElbowXZ, FiOut3ElbowXY)
# Inlet/Outlet Stubs
FiRemovableLayer := layer_new("FiRemovablePlu", red)
L_FiEntPipeStub := Z_FiEntranceStub - Z_FiEntranceBottom + SocketDepth(ND_FiTrunk)
L_FiExitPipeStub := Z_FiExitStub - Z_FiExitBottom + SocketDepth(ND_FiTrunk)
L_ExitBoxDrainStub := H_FiExit + SocketDepth(ND_FiExitWaste)
FiEnt1PipeStub := PipeF(FiInletCoupling1_origin + [0 m; 0 m; CouplingLength(ND_FiTrunk) - 2*SocketDepth(ND_FiTrunk)], L_FiEntPipeStub, [0; 90]*deg, ND_FiTrunk, PS_Default)
FiEnt2PipeStub := PipeF(FiInletCoupling2_origin + [0 m; 0 m; CouplingLength(ND_FiTrunk) - 2*SocketDepth(ND_FiTrunk)], L_FiEntPipeStub, [0; 90]*deg, ND_FiTrunk, PS_Default)
FiEnt3PipeStub := PipeF(FiInletCoupling3_origin + [0 m; 0 m; CouplingLength(ND_FiTrunk) - 2*SocketDepth(ND_FiTrunk)], L_FiEntPipeStub, [0; 90]*deg, ND_FiTrunk, PS_Default)
FiExit0PipeStub := PipeF(FiExitCoupling0_origin + [0 m; 0 m; CouplingLength(ND_FiTrunk) - 2*SocketDepth(ND_FiTrunk)], L_FiExitPipeStub, [0; 90]*deg, ND_FiTrunk, PS_Default)
FiExit1PipeStub := PipeF(FiExitCoupling1_origin + [0 m; 0 m; CouplingLength(ND_FiTrunk) - 2*SocketDepth(ND_FiTrunk)], L_FiExitPipeStub, [0; 90]*deg, ND_FiTrunk, PS_Default)
FiExit2PipeStub := PipeF(FiExitCoupling3_origin + [0 m; 0 m; CouplingLength(ND_FiExitWaste) - 2*SocketDepth(ND_FiExitWaste)], L_ExitBoxDrainStub, [0; 90]*deg, ND_FiExitWaste, PS_Default)
FiOut3PipeStub := PipeF([
    FiExitCoupling2_origin[0];
    FiExitCoupling2_origin[1];
    FiExitCoupling2_origin[2] + CouplingLength(ND_FiTrunk) - 2*SocketDepth(ND_FiTrunk)
], L_FiExitPipeStub, [0; 90]*deg, ND_FiTrunk, PS_Default)
FiRemovableFrz := FreezeLayer("FiRemovablePlu")
FiEntExitStubs := stack(FiRemovableLayer, FiEnt1PipeStub, FiEnt2PipeStub, FiEnt3PipeStub, FiExit0PipeStub, FiExit1PipeStub, FiExit2PipeStub, FiOut3PipeStub, FiRemovableFrz)
FiEntExitPipingScript := stack(SelectFiPipeLayer, FiIn0PipeScript, FiIn1PipeScript, FiIn2PipeScript, FiIn3PipeScript, FiOut0PipeScript, FiOut1PipeScript, FiOut2PipeScript, FiOut3PipeScript, LayerFiPipeFrz)
FiEntExitFittingScript := stack(SelectFiFittingLayer, FiIn0FittingScript, FiIn1FittingScript, FiIn2FittingScript, FiIn3FittingScript, FiOut0FittingScript, FiOut1FittingScript, FiOut2FittingScript, FiOut3FittingScript, LayerFiFittingFrz)
FiEntExitPlumbingScript := stack(FiEntExitPipingScript, FiEntExitFittingScript, FiEntExitStubs)
FiAuxScript := stack(FiAuxBoxScript, FiAuxPlumbingScript, FiEntExitPlumbingScript)
# Sand Drain
# this all needs to be updated to a wye at some point
FiSandDrainPipe_Origin := Fi_origin + [
    -W_Fi/2 + ConRadius(ND_FiBwTrunk) + S_Fitting;
    ConRadius(ND_FiSandOutlet);
    2*ConRadius(ND_FiBwManBranch)
]
L_FiSandDrainPipeVert := H_FiSandOutlet + CapHeight(ND_FiSandOutlet) + B_FiManifoldBranch + T_FiWall + 2*ValveLength(ND_FiSandOutlet)
FiSandDrainPipeLayer := layer_new("FiSandDrainPlu", blue)
DrawFiSandDrainPipeVert := PipeF(FiSandDrainPipe_Origin, L_FiSandDrainPipeVert, [0; 90]*deg, ND_FiSandOutlet, PS_Default)
L_FiSandDrainPipeAngled := sqrt(2)*(2*outerradius(ND_FiSandOutlet) + B_FiManifoldBranch + T_FiWall + 2*ValveLength(ND_FiSandOutlet) - (ValveLength(ND_FiSandOutlet) + ValveSocket(ND_FiSandOutlet))/sqrt(2))
DrawFiSandDrainPipeAngled := PipeSUBF([
    FiSandDrainPipe_Origin[0];
    FiSandDrainPipe_Origin[1] - (B_FiManifoldBranch + T_FiWall + 2*ValveLength(ND_FiSandOutlet));
    Fi_origin[2] + H_FiSandOutlet - (ValveLength(ND_FiSandOutlet) + ValveSocket(ND_FiSandOutlet))/sqrt(2) + 2*outerradius(ND_FiManBranch)
], L_FiSandDrainPipeAngled, [-135; -90]*deg, ND_FiSandOutlet, PS_Default, ["FiTankCon"])
DrawFiOutletCap := CapF([0; 0; L_FiSandDrainPipeVert] + FiSandDrainPipe_Origin, [0; 270]*deg, ND_FiSandOutlet)
DrawFiSandOutletValve := insertdwg("https://confluence.cornell.edu/download/attachments/173604905/Fi-Scaled-Gate-Valve-Threaded.dwg", [
    FiSandDrainPipe_Origin[0];
    FiSandDrainPipe_Origin[1] - (B_FiManifoldBranch + T_FiWall + 2*ValveLength(ND_FiSandOutlet)) - (ValveLength(ND_FiSandOutlet) - ValveSocket(ND_FiSandOutlet))/sqrt(2);
    Fi_origin[2] + H_FiSandOutlet - (ValveLength(ND_FiSandOutlet) + ValveSocket(ND_FiSandOutlet))/sqrt(2) + 2*outerradius(ND_FiManBranch) - (ValveLength(ND_FiSandOutlet) - ValveSocket(ND_FiSandOutlet))/sqrt(2)
], 2*outerradius(ND_FiSandOutlet)/(1.16 m), 2*outerradius(ND_FiSandOutlet)/(1.16 m), 0 deg)
RotateFiSandOutletValve1 := Rotate3DLast([
    FiSandDrainPipe_Origin[0];
    FiSandDrainPipe_Origin[1] - (B_FiManifoldBranch + T_FiWall + 2*ValveLength(ND_FiSandOutlet)) - (ValveLength(ND_FiSandOutlet) - ValveSocket(ND_FiSandOutlet))/sqrt(2);
    Fi_origin[2] + H_FiSandOutlet - (ValveLength(ND_FiSandOutlet) + ValveSocket(ND_FiSandOutlet))/sqrt(2) + 2*outerradius(ND_FiManBranch) - (ValveLength(ND_FiSandOutlet) - ValveSocket(ND_FiSandOutlet))/sqrt(2)
], "z", -45 deg)
RotateFiSandOutletValve2 := Rotate3DLast([
    FiSandDrainPipe_Origin[0];
    FiSandDrainPipe_Origin[1] - (B_FiManifoldBranch + T_FiWall + 2*ValveLength(ND_FiSandOutlet)) - (ValveLength(ND_FiSandOutlet) - ValveSocket(ND_FiSandOutlet))/sqrt(2);
    Fi_origin[2] + H_FiSandOutlet - (ValveLength(ND_FiSandOutlet) + ValveSocket(ND_FiSandOutlet))/sqrt(2) + 2*outerradius(ND_FiManBranch) - (ValveLength(ND_FiSandOutlet) - ValveSocket(ND_FiSandOutlet))/sqrt(2)
], "y", 90 deg)
FreezeFiSandDrain := FreezeLayer("FiSandDrainPlu")
FiSandDrainScript := stack(FiSandDrainPipeLayer, DrawFiSandDrainPipeVert, DrawFiSandDrainPipeAngled, DrawFiOutletCap, DrawFiSandOutletValve, RotateFiSandOutletValve1, RotateFiSandOutletValve2, FreezeFiSandDrain)
# Backwash Siphon
L_FiSiphonPipeBottom := W_PlantDC/2 + FiInletChannel_Origin[1] + W_FiInletChannel - (Fi_origin[1] + L_Fi + T_FiWall + SocketDepth(ND_FiSiphon) + ShortTeeLength(ND_FiSiphon) + ElbowRadius(ND_FiSiphon)) - ElbowRadius(ND_FiSiphon) = 3.1569 m
Y_FiSiphonPipe1End := Fi_origin[1] + L_Fi + T_FiWall - CouplingLength(ND_FiSiphon) + SocketDepth(ND_FiSiphon) - max((T_FiWall - CouplingLength(ND_FiSiphon)) + 2*SocketDepth(ND_FiSiphon), 2*SocketDepth(ND_FiSiphon))
Y_FiSiphonManifoldStart := Y_FiSiphonPipe1End - ElbowRadius(ND_FiSiphon) - ShortTeeLength(ND_FiSiphon)
Y_FiSiphonManifoldEnd := Fi_origin[1]
# Siphon Fittings Other than Drain Channel Coupling
FiSiphonCoupling := CouplingSUBF([
    Fi_origin[0] - S_Fitting - ConRadius(ND_FiSiphon);
    Fi_origin[1] + L_Fi + T_FiWall - SocketDepth(ND_FiSiphon);
    Z_FiSiphonCoupling
], [90; 0]*deg, ND_FiSiphon, PS_Default, ["FiTankCon"])
FiSiphonTee := TeeF([
    Fi_origin[0] - S_Fitting - ConRadius(ND_FiSiphon);
    Fi_origin[1] + L_Fi/2;
    Z_FiSiphonInlet - outerradius(ND_FiSiphon) + ShortTeeLength(ND_FiSiphon)
], [0; 90; 90]*deg, ND_FiSiphon, PS_Default)
FiSiphonElbow1 := ElbowF([
    Fi_origin[0] - S_Fitting - ConRadius(ND_FiSiphon);
    Fi_origin[1] + L_Fi/2 + ElbowRadius(ND_FiSiphon);
    Z_FiSiphonCoupling
], [90; 90; 90]*deg, ND_FiSiphon, PS_Default)
FiSiphonManifoldCap1 := CapF([
    Fi_origin[0] - S_Fitting - ConRadius(ND_FiSiphon);
    Y_FiSiphonManifoldEnd + ConRadius(ND_FiSiphon) - outerradius(ND_FiSiphon);
    Z_FiSiphonInlet - outerradius(ND_FiSiphon)
], [-90; 0]*deg, ND_FiSiphon)
FiSiphonManifoldCap2 := CapF([
    Fi_origin[0] - S_Fitting - ConRadius(ND_FiSiphon);
    Fi_origin[1] + L_Fi - ConRadius(ND_FiSiphon) + outerradius(ND_FiSiphon);
    Z_FiSiphonInlet - outerradius(ND_FiSiphon)
], [90; 0]*deg, ND_FiSiphon)
FiSiphonTee2_Origin := [
    Fi_origin[0] - S_Fitting - ConRadius(ND_FiSiphon);
    Fi_origin[1] + L_Fi + T_FiWall + SocketDepth(ND_FiSiphon);
    Z_FiSiphonCoupling
]
FiSiphonTee2 := TeeF(FiSiphonTee2_Origin, [90; 90; 90]*deg, ND_FiSiphon, PS_Default)
FiSiphonElbow0 := ElbowF([
    Fi_origin[0] - S_Fitting - ConRadius(ND_FiSiphon);
    Fi_origin[1] + T_FiWall + L_Fi + SocketDepth(ND_FiSiphon) + ShortTeeLength(ND_FiSiphon) + ElbowRadius(ND_FiSiphon);
    Fi_origin[2]
], [90; -90; 270]*deg, ND_FiSiphon, PS_Default)
FiSiphonElbow01 := ElbowF([
    Fi_origin[0] - S_Fitting - ConRadius(ND_FiSiphon);
    Fi_origin[1] + L_Fi + T_FiWall + SocketDepth(ND_FiSiphon) + ShortTeeLength(ND_FiSiphon) + ElbowRadius(ND_FiSiphon) + L_FiSiphonPipeBottom;
    Fi_origin[2]
], [270; 90; 90]*deg, ND_FiSiphon, PS_Default)
FiSiphonReducerCyl1 := CylinderF([
    Fi_origin[0] - S_Fitting - ConRadius(ND_FiSiphon);
    Fi_origin[1] + L_Fi + T_FiWall + SocketDepth(ND_FiSiphon) + ShortTeeLength(ND_FiSiphon);
    Z_FiSiphonCoupling + ShortTeeLength(ND_FiSiphon)
], outerradius(ND_FiSiphon), SocketDepth(ND_FiSiphon), [0; 90]*deg)
FiSiphonReducerCyl2 := CylinderF([
    Fi_origin[0] - S_Fitting - ConRadius(ND_FiSiphon);
    Fi_origin[1] + L_Fi + T_FiWall + SocketDepth(ND_FiSiphon) + ShortTeeLength(ND_FiSiphon);
    Z_FiSiphonCoupling + ShortTeeLength(ND_FiSiphon)
], outerradius(ND_FiSiphonAirValve), SocketDepth(ND_FiSiphon), [0; 90]*deg)
FiSiphonReducerSubtract := SubtractF(["FiFittingsPlu"], "DeleteMe")
SelectFiValveLayer := SelectLayer("FiValvePlu")
FiSiphonAirValve := insertdwg("https://confluence.cornell.edu/download/attachments/173604905/FiMetalBallValve.dwg", [
    Fi_origin[0] - S_Fitting - ConRadius(ND_FiSiphon);
    Fi_origin[1] + L_Fi + T_FiWall + SocketDepth(ND_FiSiphon) + ShortTeeLength(ND_FiSiphon);
    Z_FiSiphonCoupling + ShortTeeLength(ND_FiSiphon) + SocketDepth(ND_FiSiphon)
], 2*outerradius(ND_FiSiphonAirValve)*1/(125 in), 2*outerradius(ND_FiSiphonAirValve)*1/(125 in), 0 deg)
FiSiphonAirValveReducer := stack(FiSiphonReducerCyl1, LayerFiFittingFrz, FiSiphonReducerCyl2, GroupDelete, FiSiphonReducerSubtract)
SelectFiFerncos := SelectLayer("FiFerncoCouplingsPlu")
FiSiphonFernco := FerncoCouplingF([Fi_origin[0] - S_Fitting - ConRadius(ND_FiSiphon); Fi_origin[1] + L_Fi; Z_FiSiphonCoupling], [90; 0; 0]*deg, ND_FiSiphon, L_FiManFerncoCoupling)
FiSiphonFittingScript := stack(SelectFiFittingLayer, FiSiphonCoupling, FiSiphonTee, FiSiphonElbow1, FiSiphonManifoldCap1, FiSiphonManifoldCap2, FiSiphonTee2, FiSiphonElbow0, FiSiphonElbow01, FiSiphonAirValveReducer, SelectFiValveLayer, FiSiphonAirValve, LayerFiValveFrz, SelectFiFerncos, FiSiphonFernco, LayerFiFerncoFreeze)
# Siphon Pipes Up Until Drain Channel
L_FiSiphonManifold := L_Fi/2 - ShortTeeLength(ND_FiSiphon) - ConRadius(ND_FiSiphon) + outerradius(ND_FiSiphon) = 0.472909 m
L_FiSiphonPipe1a := T_FiWall - CouplingLength(ND_FiSiphon) + SocketDepth(ND_FiSiphon) + L_FiManFerncoCoupling/2 = 0.10216 m
L_FiSiphonPipe1b := L_Fi/2 - ElbowRadius(ND_FiSiphon) - L_FiManFerncoCoupling/2 = 0.263996 m
L_FiSiphonPipe2 := Z_FiSiphonCoupling - ElbowRadius(ND_FiSiphon) - (Z_FiSiphonInlet - outerradius(ND_FiSiphon) + ShortTeeLength(ND_FiSiphon)) = 1.42957 m
L_FiSiphonPipe3 := 2*SocketDepth(ND_FiSiphon)
L_FiSiphonPipe4 := Z_FiSiphonCoupling - ElbowRadius(ND_FiSiphon) - ShortTeeLength(ND_FiSiphon) - Fi_origin[2]
FiSiphonPipe2 := PipeF([
    Fi_origin[0] - S_Fitting - ConRadius(ND_FiSiphon);
    Fi_origin[1] + L_Fi/2;
    Z_FiSiphonCoupling - ElbowRadius(ND_FiSiphon)
], L_FiSiphonPipe2, [0; -90]*deg, ND_FiSiphon, PS_Default)
FiSiphonManifold1 := PipeF([
    Fi_origin[0] - S_Fitting - ConRadius(ND_FiSiphon);
    Fi_origin[1] + L_Fi/2 - ShortTeeLength(ND_FiSiphon);
    Z_FiSiphonInlet - outerradius(ND_FiSiphon)
], L_Fi/2 - ShortTeeLength(ND_FiSiphon) - ConRadius(ND_FiSiphon) + outerradius(ND_FiSiphon), [90; 0]*deg, ND_FiSiphon, PS_Default)
FiSiphonManifold2 := PipeF([
    Fi_origin[0] - S_Fitting - ConRadius(ND_FiSiphon);
    Fi_origin[1] + L_Fi - ConRadius(ND_FiSiphon) + outerradius(ND_FiSiphon);
    Z_FiSiphonInlet - outerradius(ND_FiSiphon)
], L_Fi/2 - ShortTeeLength(ND_FiSiphon) - ConRadius(ND_FiSiphon) + outerradius(ND_FiSiphon), [90; 0]*deg, ND_FiSiphon, PS_Default)
FiSiphonPipe3 := PipeF([
    Fi_origin[0] - S_Fitting - ConRadius(ND_FiSiphon);
    Fi_origin[1] + L_Fi + T_FiWall - SocketDepth(ND_FiSiphon);
    Z_FiSiphonCoupling
], L_FiSiphonPipe3, [-90; 0]*deg, ND_FiSiphon, PS_Default)
FiSiphonPipe4 := PipeF([
    Fi_origin[0] - S_Fitting - ConRadius(ND_FiSiphon);
    Fi_origin[1] + L_Fi + T_FiWall + SocketDepth(ND_FiSiphon) + ShortTeeLength(ND_FiSiphon);
    Z_FiSiphonCoupling - ShortTeeLength(ND_FiSiphon)
], L_FiSiphonPipe4, [0; -90]*deg, ND_FiSiphon, PS_Default)
FiSiphonPipe5 := PipeF([
    Fi_origin[0] - S_Fitting - ConRadius(ND_FiSiphon);
    Fi_origin[1] + L_Fi + T_FiWall + SocketDepth(ND_FiSiphon) + ShortTeeLength(ND_FiSiphon) + ElbowRadius(ND_FiSiphon) + L_FiSiphonPipeBottom;
    Fi_origin[2]
], L_FiSiphonPipeBottom, [90; 0]*deg, ND_FiSiphon, PS_Default)
FiSiphonPipeScript := stack(SelectFiPipeLayer, FiSiphonPipe2, FiSiphonManifold1, FiSiphonManifold2, FiSiphonPipe3, FiSiphonPipe4, FiSiphonPipe5, LayerFiPipeFrz)
# Siphon Manifold Orifices
FirstFiSiphonManOrifice := CylinderF([
    Fi_origin[0] - S_Fitting - ConRadius(ND_FiSiphon);
    Fi_origin[1] + L_Fi - B_FiSiphonManOrifices/2 - ConRadius(ND_FiSiphon) + outerradius(ND_FiSiphon);
    Z_FiSiphonInlet - outerradius(ND_FiSiphon)
], D_FiSiphonManOrifices/2, 1.2*ConRadius(ND_FiSiphon), [0; 90]*deg)
ArrayFiSiphonManOrifices := array_all(N_FiSiphonManOrifices/2, 1, -B_FiSiphonManOrifices)
MirrorFiSiphonManOrifices := Mirror3dAll("zx", [0 m; Fi_origin[1] + L_Fi/2], "n")
FiSiphonOrifices := stack(FirstFiSiphonManOrifice, ArrayFiSiphonManOrifices, MirrorFiSiphonManOrifices)
SubtractFiSiphonOrificesPipe := SubtractF(["FiPipePlu"], "DeleteMe")
FiSiphonPipe1a := PipeSUBF([
    Fi_origin[0] - S_Fitting - ConRadius(ND_FiSiphon);
    Fi_origin[1] + L_Fi + T_FiWall - CouplingLength(ND_FiSiphon) + SocketDepth(ND_FiSiphon);
    Z_FiSiphonCoupling
], L_FiSiphonPipe1a, [90; 0]*deg, ND_FiSiphon, PS_Default, ["FiTankCon"])
# these need to be stacked after the orifices, otherwise the pipes effectively union after the subtraction
FiSiphonPipe1b := PipeF([
    Fi_origin[0] - S_Fitting - ConRadius(ND_FiSiphon);
    Fi_origin[1] + L_Fi - L_FiManFerncoCoupling/2;
    Z_FiSiphonCoupling
], L_FiSiphonPipe1b, [90; 0]*deg, ND_FiSiphon, PS_Default)
SubtractFiSiphonOrificesCaps := SubtractF(["FiFittingsPlu"], "DeleteMe")
FiSiphonManOrificeScript := stack(FiSiphonOrifices, GroupDelete, SubtractFiSiphonOrificesPipe, FiSiphonOrifices, GroupDelete, SubtractFiSiphonOrificesCaps, SelectFiPipeLayer, FiSiphonPipe1a, FiSiphonPipe1b, LayerFiPipeFrz)
FiSiphonScript := stack(FiSiphonFittingScript, FiSiphonPipeScript, FiSiphonManOrificeScript)
# Array the Filter and Union Concrete
ThawFilter := ThawMultiple(["Fi*"])
FiArray1Frz := ["FiAuxPipePlu"; "FiAuxFittingPlu"; "FiAuxRemovablePlu"; "FiDistPipePlu"; "FiDistFittingPlu"; "FiInletChannelCon"; "FiInletFittingsPlu"; "FiInletPipePlu"; "FiOFDistCon"]
FreezeFiPieces := FreezeMultiple(FiArray1Frz)
ArrayFi1 := Array_All(1, N_Fi, W_FiEntrance + 2*T_PlantWall + W_FiOverflow)
FreezeFi := FreezeMultiple(["Fi*"])
FiArray2Thw := ["FiAuxPipePlu"; "FiAuxFittingPlu"; "FiAuxRemovablePlu"; "FiDistPipePlu"; "FiDistFittingPlu"; "FiOFDistCon"]
ThawFiPieces := ThawMultiple(FiArray2Thw)
ArrayFi2 := Array_All(1, N_Fi - (N_Fi > 1), W_FiEntrance + 2*T_FiWall + W_FiOverflow)
ThawFilterConcrete := ThawMultiple(["Fi*Con"])
GroupFilterConcrete := GroupAll("FiCon")
FiArrayScript :=
    stack(ThawFilterConcrete, Union_All, GroupFilterConcrete, FreezeFi) if N_Fi == 1
    stack(ThawFilter, FreezeFiPieces, ArrayFi1, FreezeFi, ThawFiPieces, ArrayFi2, FreezeFi, ThawFilterConcrete, Union_All, GroupFilterConcrete, FreezeFi) otherwise
# Overflow, Inlet and Distribution Weirs, and Adjust Wall Thickness
FiEntranceCutout := BoxF(FiEntranceBox_origin, FiEntranceBox_origin + [-W_FiEntrance; L_FiEntrance; H_FiEntrance], [0; 0; 0]*deg)
ArrayFiEntranceCutout := ArrayLast(1, N_Fi, W_FiEntrance + 2*T_FiWall + W_FiOverflow)
FiExitCutout := BoxF(FiExitBox_origin, FiExitBox_origin + [-W_FiEntrance; L_FiExit; H_FiEntrance], [0; 0; 0]*deg)
ArrayFiExitCutout := ArrayLast(1, N_Fi, W_FiEntrance + 2*T_FiWall + W_FiOverflow)
FiOverflowCutout := BoxF(FiOverflowBox_Origin, FiOverflowBox_Origin + [-W_FiOverflow; L_FiEntrance; H_FiEntrance], [0; 0; 0]*deg)
ArrayFiOverflowCutout := ArrayLast(1, N_Fi - 1, W_FiEntrance + 2*T_FiWall + W_FiOverflow)
FiDistCutout := BoxF(FiDistBox_Origin, FiDistBox_Origin + [-W_FiOverflow; L_FiExit; H_FiEntrance], [0; 0; 0]*deg)
ArrayFiDistCutout := ArrayLast(1, N_Fi - 1, W_FiEntrance + 2*T_FiWall + W_FiOverflow)
FiIChannelCutout := BoxF(FiInletChannel_Origin, FiInletChannel_Origin + [-L_FiInletChannel; T_PlantWall; H_FiInletChannel], [0; 0; 0]*deg)
FiArrayWallAdjust := BoxF(FiOverflowBox_Origin + [T_ChannelWall; T_PlantWall + L_FiOverflow; -T_PlantWall], FiOverflowBox_Origin + [
    T_PlantWall;
    -W_FiEntrance - T_ChannelWall - W_FiEntrance - T_PlantWall + L_FiOverflow;
    H_FiEntrance
], [0; 0; 0]*deg)
FiWallThicknessCutouts :=
    stack(FiEntranceCutout, ArrayFiEntranceCutout, FiExitCutout, ArrayFiExitCutout, FiOverflowCutout, ArrayFiOverflowCutout, FiDistCutout, ArrayFiDistCutout, FiIChannelCutout) if N_Fi < 2
    stack(FiEntranceCutout, ArrayFiEntranceCutout, FiExitCutout, ArrayFiExitCutout, FiOverflowCutout, ArrayFiOverflowCutout, FiDistCutout, ArrayFiDistCutout, FiIChannelCutout, FiArrayWallAdjust, ArrayFiDistCutout) otherwise
FiEntWeir := BoxF([FiEntranceBox_origin[0]; FiEntranceBox_origin[1] + L_FiEntrance; Z_FiEntranceWeir], [
    FiEntranceBox_origin[0] - W_FiEntrance;
    FiEntranceBox_origin[1] + L_FiEntrance + T_PlantWall;
    Z_FiTop
], [0; 0; 0]*deg)
ArrayFiEntWeir := ArrayLast(1, N_Fi, W_FiEntrance + 2*T_FiWall + W_FiOverflow) = "-array l  R 1 3 2.31142"
FiOverflowWeirs := BoxF([FiEntranceBox_origin[0]; FiEntranceBox_origin[1]; Z_FiOverflowWeir], [
    FiEntranceBox_origin[0] + T_ChannelWall + (N_Fi > 1)*(N_Fi - 1)*(W_FiOverflow + T_ChannelWall) + (N_Fi > 2)*(N_Fi - 1)*(W_FiEntrance + T_ChannelWall);
    FiEntranceBox_origin[1] + L_FiOverflowWeir;
    Z_FiTop
], [0; 0; 0]*deg)
FiDistBarrierCut := BoxF(FiExitBox_origin + [0 m; L_FiExit; H_FiExit], FiExitBox_origin + [
    T_ChannelWall + (N_Fi > 1)*(N_Fi - 1)*(W_FiOverflow + T_FiWall) + (N_Fi > 2)*(N_Fi - 1)*(W_FiEntrance + T_FiWall);
    0;
    H_FiDistBarrier
], [0; 0; 0]*deg)
FiSubtractWeirs := SubtractF(["Fi*Con"], "DeleteMe")
FiWeirScript := stack(FiEntWeir, ArrayFiEntWeir, FiOverflowWeirs, FiDistBarrierCut, FiWallThicknessCutouts, GroupDelete, FiSubtractWeirs)
# Finish Distribution Plumbing
SelectDistFittingLayer := SelectLayer("FiDistFittingPlu")
FiDistElbow2 := ElbowF([
    FiEntranceBox_origin[0] + W_FiEntrance + 2*T_PlantWall + 3/2*W_FiOverflow + T_ChannelWall;
    min(FiExitBox_origin[1] + L_FiExit/2 - ElbowRadius(ND_DistPipe) - 2*SocketDepth(ND_DistPipe), FiExitBox_origin[1] - T_PlantWall);
    Z_FiDistPipe
], [0; 0; 180]*deg, ND_DistPipe, PS_Default)
FiDistTee := TeeF([
    FiEntranceBox_origin[0] + T_ChannelWall + W_FiOverflow/2;
    min(FiExitBox_origin[1] + L_FiExit/2 - ElbowRadius(ND_DistPipe) - 2*SocketDepth(ND_DistPipe), FiExitBox_origin[1] - T_PlantWall) - ElbowRadius(ND_DistPipe) + ShortTeeLength(ND_DistPipe);
    Z_FiDistPipe
], [0; 0; 0]*deg, ND_DistPipe, PS_Default)
ArrayFiDist := ArrayLast(1, N_Fi - 2, W_FiEntrance + W_FiOverflow + 2*T_PlantWall)
FiDistFinishFittingScript :=
    stack(SelectDistFittingLayer, FiDistElbow2, FiDistFittingFrz) if N_Fi ≤ 2
    stack(SelectDistFittingLayer, FiDistElbow2, FiDistTee, ArrayFiDist, FiDistFittingFrz) otherwise
SelectDistPipeLayer := SelectLayer("FiDistPipePlu")
L_FiDistPipe2 := max(L_FiExit/2 - ElbowRadius(ND_DistPipe) + T_PlantWall, 2*SocketDepth(ND_DistPipe)) + ElbowRadius(ND_DistPipe) - ShortTeeLength(ND_DistPipe)
L_FiDistPipe3 := W_FiOverflow + W_FiEntrance + 2*T_PlantWall - ElbowRadius(ND_DistPipe) - TeeLength(ND_DistPipe)/2
L_FiDistPipe4 := max(L_FiExit/2 - ElbowRadius(ND_DistPipe) + T_PlantWall, 2*SocketDepth(ND_DistPipe))
L_FiDistPipe5 := W_FiOverflow + W_FiEntrance + 2*T_PlantWall - TeeLength(ND_DistPipe)
FiDistPipe2 := PipeF([
    FiEntranceBox_origin[0] + T_ChannelWall + W_FiOverflow/2;
    FiExitBox_origin[1] + L_FiExit/2 - ElbowRadius(ND_DistPipe);
    Z_FiDistPipe
], L_FiDistPipe2, [90; 0; 0]*deg, ND_DistPipe, PS_Default)
FiDistPipe3 := PipeF([
    FiEntranceBox_origin[0] + W_FiEntrance + 2*T_PlantWall + 3/2*W_FiOverflow + T_ChannelWall - ElbowRadius(ND_DistPipe);
    min(FiExitBox_origin[1] + L_FiExit/2 - ElbowRadius(ND_DistPipe) - 2*SocketDepth(ND_DistPipe), FiExitBox_origin[1] - T_PlantWall) - ElbowRadius(ND_DistPipe);
    Z_FiDistPipe
], L_FiDistPipe3, [0; 0; 0]*deg, ND_DistPipe, PS_Default)
FiDistPipe4 := PipeF([
    FiEntranceBox_origin[0] + W_FiEntrance + 2*T_PlantWall + 3/2*W_FiOverflow + T_ChannelWall;
    FiExitBox_origin[1] + L_FiExit/2 - ElbowRadius(ND_DistPipe);
    Z_FiDistPipe
], L_FiDistPipe4, [90; 0; 0]*deg, ND_DistPipe, PS_Default)
FiDistPipe5 := PipeF([
    FiEntranceBox_origin[0] + T_ChannelWall + W_FiOverflow/2 - TeeLength(ND_DistPipe)/2;
    min(FiExitBox_origin[1] + L_FiExit/2 - ElbowRadius(ND_DistPipe) - 2*SocketDepth(ND_DistPipe), FiExitBox_origin[1] - T_PlantWall) - ElbowRadius(ND_DistPipe);
    Z_FiDistPipe
], L_FiDistPipe5, [0; 0; 0]*deg, ND_DistPipe, PS_Default)
FiDistFinishPipeScript :=
    stack(SelectDistPipeLayer, FiDistPipe2, FiDistPipe3, FiDistPipeFrz) if N_Fi ≤ 2
    stack(SelectDistPipeLayer, FiDistPipe2, FiDistPipe3, FiDistPipe4, ArrayFiDist, FiDistPipe5, ArrayFiDist, FiDistPipeFrz) otherwise
FiDistFinishScript := stack(FiDistFinishFittingScript, FiDistFinishPipeScript)
# Finish Siphon Plumbing
# Channel Coupling
FiSiphonChannelCoupling_Origin := [
    Fi_origin[0] - S_Fitting - ConRadius(ND_FiSiphon);
    Fi_origin[1] + L_Fi + T_FiWall + SocketDepth(ND_FiSiphon) + ShortTeeLength(ND_FiSiphon) + 2*ElbowRadius(ND_FiSiphon) + L_FiSiphonPipeBottom;
    PlantSideDC_Origin[2] - H_PlantDC + Slope_PlantDC*((Plant_Origin[0] - L_Sed - T_PlantWall) - (Fi_origin[0] - S_Fitting - ConRadius(ND_FiSiphon))) - CouplingLength(ND_FiSiphon)
]
FiSiphonChannelCoupling(N) := CouplingSUBF(FiSiphonChannelCoupling_Origin + (N - 1)*[W_Fi + T_FiWall; 0 m; Slope_PlantDC*(W_Fi + T_FiWall)], [0; 270]*deg, ND_FiSiphon, PS_Default, ["DrainChannelCon"])
FiSiphonChannelCouplingScript :=
    N ← 1
    Local ← stack(SelectFiFittingLayer, FiSiphonChannelCoupling(N))
    while N_Fi > N
        N ← N + 1
        Local ← stack(Local, FiSiphonChannelCoupling(N))
    Local ← stack(Local, LayerFiFittingFrz)
    return Local
# Pipe Beneath Drain Channel
FiSiphonChannelPipe_Origin := [
    Fi_origin[0] - S_Fitting - ConRadius(ND_FiSiphon);
    Fi_origin[1] + L_Fi + T_FiWall + SocketDepth(ND_FiSiphon) + ShortTeeLength(ND_FiSiphon) + 2*ElbowRadius(ND_FiSiphon) + L_FiSiphonPipeBottom;
    Fi_origin[2] + ElbowRadius(ND_FiSiphon)
]
L_FiSiphonChannelPipe1 := FiSiphonChannelCoupling_Origin[2] - CouplingLength(ND_FiSiphon) + 2*SocketDepth(ND_FiSiphon) - (Z_FiBottom + ElbowRadius(ND_FiSiphon)) = 1.00265 m
FiSiphonChannelPipe(N) := PipeSUBF(FiSiphonChannelPipe_Origin + (N - 1)*[W_Fi + T_FiWall; 0 m; 0 m], L_FiSiphonChannelPipe1 - (N - 1)*Slope_PlantDC*(W_Fi + T_FiWall), [0; 90]*deg, ND_FiSiphon, PS_Default, ["DrainChannelCon"])
FiSiphonChannelPipeScript :=
    N ← 1
    Local ← stack(SelectFiPipeLayer, FiSiphonChannelPipe(N))
    while N_Fi > N
        N ← N + 1
        Local ← stack(Local, FiSiphonChannelPipe(N))
    return Local
# Drain Channel Stub
L_FiSiphonChannelStub := Z_FiSiphonOutlet - FiSiphonChannelCoupling_Origin[2] = 0.465386 m
FiSiphonChannelStub(N) := PipeF(FiSiphonChannelCoupling_Origin + (N - 1)*[W_Fi + T_FiWall; 0 m; -Slope_PlantDC*(W_Fi + T_FiWall)], L_FiSiphonChannelStub + (N - 1)*Slope_PlantDC*(W_Fi + T_FiWall), [0; 90; 0]*deg, ND_FiSiphon, PS_Default)
FiSiphonChannelStubScript :=
    N ← 1
    Local ← FiSiphonChannelStub(N)
    while N_Fi > N
        N ← N + 1
        Local ← stack(Local, FiSiphonChannelStub(N))
    Local ← stack(Local, LayerFiPipeFrz)
    return Local
FiSiphonFinishScript := stack(FiSiphonChannelCouplingScript, FiSiphonChannelPipeScript, FiSiphonChannelStubScript)
# Finish Box Drain Plumbing
# Overflow Box Drain Couplings and Elbow
FiOverflowDrainElbow(N) := ElbowSUBF([
    FiEntranceBox_origin[0] + T_ChannelWall + W_FiOverflow/2 + (N - 1)*(W_Fi + T_FiWall);
    Y_FiOverflowHorizDrainPipeEnd - ElbowRadius(ND_FiEntOverflow);
    Z_FiOverflowVertDrainPipeEnd
], [0; 90; -90]*deg, ND_FiEntOverflow, PS_Default, ["FiCon"])
FiOverflowDrainElbowScript :=
    N ← 1
    Local ← stack(SelectFiFittingLayer, FiOverflowDrainElbow(N))
    while N_Fi - 1 > N
        N ← N + 1
        Local ← stack(Local, FiOverflowDrainElbow(N))
    return Local
# the elbow is stacked within the coupling!!!
FiOverflowDrainCouplingHoriz(N) := CouplingSUBF([
    FiEntranceBox_origin[0] + T_ChannelWall + W_FiOverflow/2 + (N - 1)*(W_Fi + T_FiWall);
    FiInletChannel_Origin[1] + W_FiInletChannel + T_PlantWall - SocketDepth(ND_FiEntOverflow);
    Z_FiOverflowVertDrainPipeEnd - ElbowRadius(ND_FiEntOverflow)
], [90; 0]*deg, ND_FiEntOverflow, PS_Default, ["DrainChannelCon"])
FiOverflowCouplingFinishScript :=
    N ← 1
    Local ← stack(FiOverflowDrainElbowScript, FiOverflowDrainCouplingHoriz(N))
    while N_Fi - 1 > N
        N ← N + 1
        Local ← stack(Local, FiOverflowDrainCouplingHoriz(N))
    Local ← stack(Local, LayerFiFittingFrz)
    return Local
# Overflow Box Drain Horizontal Pipes
FiOverflowDrainPipeHoriz(N) := PipeSUBF([
    FiEntranceBox_origin[0] + T_ChannelWall + W_FiOverflow/2 + (N - 1)*(W_Fi + T_FiWall);
    Y_FiOverflowHorizDrainPipeStart;
    Z_FiOverflowVertDrainPipeEnd - ElbowRadius(ND_FiEntOverflow)
], Y_FiOverflowHorizDrainPipeStart - Y_FiOverflowHorizDrainPipeEnd, [90; 0]*deg, ND_FiEntOverflow, PS_Default, ["DrainChannelCon"])
FiOverflowPipeFinishScript :=
    N ← 1
    Local ← stack(SelectFiPipeLayer, FiOverflowDrainPipeHoriz(N))
    while N_Fi - 1 > N
        N ← N + 1
        Local ← stack(Local, FiOverflowDrainPipeHoriz(N))
    Local ← stack(Local, LayerFiPipeFrz)
    return Local
# Exit Box Drain Couplings
FiExitDrainChanCoupling(N) := CouplingSUBF([
    FiExitCoupling3_origin[0] + (N - 1)*(W_Fi + T_FiWall);
    FiInletChannel_Origin[1] + W_FiInletChannel + T_PlantWall - SocketDepth(ND_FiExitWaste);
    Z_FiExitDrainOutlet
], [90; 0]*deg, ND_FiExitWaste, PS_Default, ["DrainChannelCon"])
FiExitHorizDrainCouplingScript :=
    N ← 1
    Local ← stack(SelectFiFittingLayer, FiExitDrainChanCoupling(N))
    while N_Fi > N
        N ← N + 1
        Local ← stack(Local, FiExitDrainChanCoupling(N))
    Local ← stack(Local, LayerFiFittingFrz)
    return Local
# Exit Box Drain Horizontal Pipes
L_FiExitDrainPipeHoriz := Y_FiExitHorizDrainPipeStart - Y_FiExitHorizDrainPipeEnd
FiExitDrainPipeHoriz(N) := PipeSUBF([
    FiExitCoupling3_origin[0] + (N - 1)*(W_Fi + T_FiWall);
    Y_FiExitHorizDrainPipeStart;
    Z_FiExitDrainOutlet
], L_FiExitDrainPipeHoriz, [90; 0]*deg, ND_FiExitWaste, PS_Default, ["DrainChannelCon"])
FiExitHorizDrainPipeScript :=
    N ← 1
    Local ← stack(SelectFiPipeLayer, FiExitDrainPipeHoriz(N))
    while N_Fi > N
        N ← N + 1
        Local ← stack(Local, FiExitDrainPipeHoriz(N))
    Local ← stack(Local, LayerFiPipeFrz)
    return Local
FiBoxDrainFinishScript := stack(FiOverflowCouplingFinishScript, FiOverflowPipeFinishScript, FiExitHorizDrainCouplingScript, FiExitHorizDrainPipeScript)
# Adding Boxes to Show Heights of Water and Sand
FiWaterLayer := layer_new("FiWater", blue2)
Water_FiInletChannel := BoxF(FiInletChannel_Origin, FiInletChannel_Origin + [-W_FiInletChannel; L_FiInletChannel; ZW_FiInletChannel - FiInletChannel_Origin[2]], [0; 0; 0]*deg)
Water_FiEntranceBoxTerminal := BoxF(FiEntranceBox_origin, FiEntranceBox_origin + [-L_FiEntrance; W_FiEntrance; ZW_FiEntranceTerminal - FiEntranceBox_origin[2]], [0; 0; 0]*deg)
Water_FiBoxTerminal := BoxF(Fi_origin, Fi_origin + [-L_Fi; W_Fi; ZW_FiMax - Z_FiBottom], [0; 0; 0]*deg)
Water_FiEntranceBoxClean := BoxF(FiEntranceBox_origin, FiEntranceBox_origin + [-L_FiEntrance; W_FiEntrance; ZW_FiEntranceCleanForward - FiEntranceBox_origin[2]], [0; 0; 0]*deg)
Water_FiBoxClean := BoxF(Fi_origin, Fi_origin + [-L_Fi; W_Fi; ZW_FiClean - Z_FiBottom], [0; 0; 0]*deg)
Water_FiEntranceBoxBw := BoxF(FiEntranceBox_origin, FiEntranceBox_origin + [-L_FiEntrance; W_FiEntrance; ZW_FiEntranceBwSS - FiEntranceBox_origin[2]], [0; 0; 0]*deg)
Water_FiBoxBw := BoxF(Fi_origin, Fi_origin + [-L_Fi; W_Fi; ZW_FiBwSS - Z_FiBottom], [0; 0; 0]*deg)
FreezeFiWater := FreezeLayer("FiWater")
FiWaterTerminalScript := stack(FiWaterLayer, Water_FiInletChannel, Water_FiEntranceBoxTerminal, Water_FiBoxTerminal, FreezeFiWater)
FiWaterCleanScript := stack(FiWaterLayer, Water_FiInletChannel, Water_FiEntranceBoxClean, Water_FiBoxClean, FreezeFiWater)
FiWaterBwScript := stack(FiWaterLayer, Water_FiInletChannel, Water_FiEntranceBoxBw, Water_FiBoxBw, FreezeFiWater)
FiSandLayer := layer_new("FiSand", yellow)
Sand_FiBoxForward := BoxF(Fi_origin, Fi_origin + [-L_Fi; W_Fi; H_FiSand], [0; 0; 0]*deg)
Sand_FiBoxBw := BoxF(Fi_origin, Fi_origin + [-L_Fi; W_Fi; H_FiFluidizedBed], [0; 0; 0]*deg)
FreezeFiSand := FreezeLayer("FiSand")
FiSandForwardScript := stack(FiSandLayer, Sand_FiBoxForward, FreezeFiSand)
FiSandBwScript := stack(FiSandLayer, Sand_FiBoxBw, FreezeFiSand)
ThawAll := ThawMultiple(["Fi*"])
FreezeDrainChannel := FreezeLayer("FiDrainChannelCon")
MirrorFilters := Mirror3dAll("yz", [Floc_Origin[0] - L_Floc - W_PlantDC/2 - T_PlantWall; 0 m], "n")
FreezeAll := FreezeMultiple(["Fi*"])
AC_FilterWaterTerminal := stack(FiInletChannelScript, FiTankScript, PlantDrainChannelScript, FiManifoldScript, FiAuxScript, FiSandDrainScript, FiSiphonScript, FiArrayScript, FiWeirScript, FiDistFinishScript, FiSiphonFinishScript, FiBoxDrainFinishScript, FiWaterTerminalScript, FiSandForwardScript)
AC_FilterWaterClean := stack(FiInletChannelScript, FiTankScript, PlantDrainChannelScript, FiManifoldScript, FiAuxScript, FiSandDrainScript, FiSiphonScript, FiArrayScript, FiWeirScript, FiDistFinishScript, FiSiphonFinishScript, FiBoxDrainFinishScript, FiWaterCleanScript, FiSandForwardScript)
AC_FilterWaterBw := stack(FiInletChannelScript, FiTankScript, PlantDrainChannelScript, FiManifoldScript, FiAuxScript, FiSandDrainScript, FiSiphonScript, FiArrayScript, FiWeirScript, FiDistFinishScript, FiSiphonFinishScript, FiBoxDrainFinishScript, FiWaterBwScript, FiSandBwScript)
AC_FilterWater :=
    AC_FilterWaterTerminal if EN_FilterWater == 0
    AC_FilterWaterClean if EN_FilterWater == 1
    AC_FilterWaterBw if EN_FilterWater == 2
AC_Filter :=
    stack(FiInletChannelScript, FiTankScript, PlantDrainChannelScript, FiManifoldScript, FiAuxScript, FiSandDrainScript, FiSiphonScript, FiArrayScript, FiWeirScript, FiDistFinishScript, FiSiphonFinishScript, FiBoxDrainFinishScript) if EN_DoubleTrain == 0
    stack(FiInletChannelScript, FiTankScript, PlantDrainChannelScript, FiManifoldScript, FiAuxScript, FiSandDrainScript, FiSiphonScript, FiArrayScript, FiWeirScript, FiDistFinishScript, FiSiphonFinishScript, FiBoxDrainFinishScript, ThawAll, FreezeDrainChannel, MirrorFilters, FreezeAll) otherwise
AC_Filter :=
    AC_Filter if EN_Water == 0
    AC_FilterWater otherwise
# [component: inputs AC_Filter]
