# Need to revise entrance box dimension logic and define S.FiEntranceBaffle correctly!!
S_FiEntranceBaffle := 10 cm
# Low Flow Stacked Rapid Sand Filter
T_Flange := 1 cm
# Layers
# Masonry
FiInletChannelLayer := layer_new("FiInletChannelCon", grey)
SelectFiInletChannel := SelectLayer("FiInletChannelCon")
FiInletChannelFrz := FreezeLayer("FiInletChannelCon")
FiEntExitBoxLayer := layer_new("FiEntExitBoxCon", grey)
SelectFiEntExitBox := SelectLayer("FiEntExitBoxCon")
FiEntExitBoxFrz := FreezeLayer("FiEntExitBoxCon")
FiAuxBoxLayer := layer_new("FiAuxBoxCon", grey)
SelectFiAuxBox := SelectLayer("FiAuxBoxCon")
FiAuxBoxFrz := FreezeLayer("FiAuxBoxCon")
["FiAuxBoxCon"; "FiEntExitBoxCon"]
FiConLayersThaw := layer_thaw("*Con")
FiConLayersFrz := FreezeLayer("*Con*")
FiDeleteWeirLayer := layer_new("FiDeleteWeir", grey)
SelectFiDeleteWeir := SelectLayer("FiDeleteWeir")
FreezeFiDeleteWeir := FreezeLayer("FiDeleteWeir")
# Plumbing
FiInletCouplingLayer := layer_new("FiInletCouplingPlu", green)
SelectFiInletCoupling := SelectLayer("FiInletCouplingPlu")
FiInletCouplingFrz := FreezeLayer("FiInletCouplingPlu")
FiBodyLayer := layer_new("FiBodyPlu", blue3)
SelectFiBody := SelectLayer("FiBodyPlu")
FiBodyFrz := FreezeLayer("FiBodyPlu")
FiCapLayer := layer_new("FiCapPlu", red)
SelectFiCap := SelectLayer("FiCapPlu")
FiCapFrz := FreezeLayer("FiCapPlu")
FiGasketLayer := layer_new("FiGasket", orange)
SelectFiGasket := SelectLayer("FiGasket")
FiGasketFrz := FreezeLayer("FiGasket")
FiAirRelValveLayer := layer_new("FiAirRelValvePlu", blue3)
SelectFiAirRelValve := SelectLayer("FiAirRelValvePlu")
FiAirRelValveFrz := FreezeLayer("FiAirRelValvePlu")
FiPluPipeLayer := layer_new("FiPipePlu", blue)
SelectFiPluPipe := SelectLayer("FiPipePlu")
FiPluPipeFrz := FreezeLayer("FiPipePlu")
FiPluFittingsLayer := layer_new("FiFittingsPlu", green)
SelectFiPluFittings := SelectLayer("FiFittingsPlu")
FiPluFittingsFrz := FreezeLayer("FiFittingsPlu")
FiPluRemovableLayer := layer_new("FiRemovablePlu", red)
SelectFiPluRemovable := SelectLayer("FiRemovablePlu")
FiPluRemovableFrz := FreezeLayer("FiRemovablePlu")
FiPluValvesLayer := layer_new("FiValvesPlu", blue3)
SelectFiPluValves := SelectLayer("FiValvesPlu")
FiPluValvesFrz := FreezeLayer("FiValvesPlu")
FiManAdapterLayer := layer_new("FiManFittingPlu", green)
SelectFiManAdapter := SelectLayer("FiManFittingPlu")
FiManAdapterFrz := FreezeLayer("FiManFittingPlu")
FiManTrunkCapLayer := layer_new("FiManTrunkCapPlu", red)
SelectFiManTrunkCap := SelectLayer("FiManTrunkCapPlu")
FiManTrunkCapFrz := FreezeLayer("FiManTrunkCapPlu")
FiManBranchLayer := layer_new("FiManBranchPlu", blue)
SelectFiManBranch := SelectLayer("FiManBranchPlu")
FiManBranchFrz := FreezeLayer("FiManBranchPlu")
FiManBranchCapLayer := layer_new("FiManBranchCapsPlu", red)
SelectFiManBranchCap := SelectLayer("FiManBranchCapsPlu")
FiManBranchCapFrz := FreezeLayer("FiManBranchCapsPlu")
FiManTrunkLayer := layer_new("FiManTrunkPlu", blue)
SelectFiManTrunk := SelectLayer("FiManTrunkPlu")
FiManTrunkFrz := FreezeLayer("FiManTrunkPlu")
FiBwPipeLayer := layer_new("FiBwPipePlu", blue)
SelectFiBwPipe := SelectLayer("FiBwPipePlu")
FiBwPipeFrz := FreezeLayer("FiBwPipePlu")
FiBwFittingLayer := layer_new("FiBwFittingPlu", green)
SelectFiBwFitting := SelectLayer("FiBwFittingPlu")
FiBwFittingFrz := FreezeLayer("FiBwFittingPlu")
FiBwReducerLayer := layer_new("FiBwReducerPlu", green)
SelectFiBwReducer := SelectLayer("FiBwReducerPlu")
FiBwReducerFrz := FreezeLayer("FiBwReducerPlu")
FiBwValveLayer := layer_new("FiBwValvePlu", blue3)
SelectFiBwValveLayer := SelectLayer("FiBwValvePlu")
FiBwValveFrz := FreezeLayer("FiBwValvePlu")
FiBypassPipeLayer := layer_new("FiBypassPipePlu", blue)
SelectFiBypassPipe := SelectLayer("FiBypassPipePlu")
FiBypassPipeFrz := FreezeLayer("FiBypassPipePlu")
FiBypassFittingLayer := layer_new("FiBypassFittingPlu", green)
SelectFiBypassFitting := SelectLayer("FiBypassFittingPlu")
FiBypassFittingFrz := FreezeLayer("FiBypassFittingPlu")
FiDistPipeLayer := layer_new("FiDistPipePlu", blue)
SelectFiDistPipe := SelectLayer("FiDistPipePlu")
FiDistPipeFrz := FreezeLayer("FiDistPipePlu")
FiDistFittingLayer := layer_new("FiDistFittingPlu", green)
SelectFiDistFitting := SelectLayer("FiDistFittingPlu")
FiDistFittingFrz := FreezeLayer("FiDistFittingPlu")
FiSandDrainPipeLayer := layer_new("FiSandDrainPipePlu", blue)
SelectFiSandDrainPipe := SelectLayer("FiSandDrainPipePlu")
FiSandDrainPipeFrz := FreezeLayer("FiSandDrainPipePlu")
FiSandDrainFittingLayer := layer_new("FiSandDrainFittingPlu", green)
SelectFiSandDrainFitting := SelectLayer("FiSandDrainFittingPlu")
FiSandDrainFittingFrz := FreezeLayer("FiSandDrainFittingPlu")
FiSandDrainValveLayer := layer_new("FiSandDrainValvePlu", blue3)
SelectFiSandDrainValve := SelectLayer("FiSandDrainValvePlu")
FiSandDrainValveFrz := FreezeLayer("FiSandDrainValvePlu")
FiDrainPipeLayer := layer_new("FiDrainPipePlu", blue)
SelectFiDrainPipe := SelectLayer("FiDrainPipePlu")
FiDrainPipeFrz := FreezeLayer("FiDrainPipePlu")
FiDrainFittingLayer := layer_new("FiDrainFittingPlu", green)
SelectFiDrainFitting := SelectLayer("FiDrainFittingPlu")
FiDrainFittingFrz := FreezeLayer("FiDrainFittingPlu")
FiBypassDrainPipeLayer := layer_new("FiBypassDrainPipePlu", blue)
SelectFiBypassDrainPipe := SelectLayer("FiBypassDrainPipePlu")
FiBypassDrainPipeFrz := FreezeLayer("FiBypassDrainPipePlu")
FiBypassDrainFittingLayer := layer_new("FiBypassDrainFittingPlu", green)
SelectFiBypassDrainFitting := SelectLayer("FiBypassDrainFittingPlu")
FiBypassDrainFittingFrz := FreezeLayer("FiBypassDrainFittingPlu")
FiBypassDrainRemovableLayer := layer_new("FiBypassDrainRemovablePlu", red)
SelectFiBypassDrainRemovable := SelectLayer("FiBypassDrainRemovablePlu")
FiBypassDrainRemovableFrz := FreezeLayer("FiBypassDrainRemovablePlu")
FiInletChannelDrainPipeLayer := layer_new("FiInletChannelDrainPipePlu", blue)
SelectFiInletChannelDrainPipe := SelectLayer("FiInletChannelDrainPipePlu")
FiInletChannelDrainPipeFrz := FreezeLayer("FiInletChannelDrainPipePlu")
FiInletChannelDrainFittingLayer := layer_new("FiInletChannelDrainFittingPlu", green)
SelectFiInletChannelDrainFitting := SelectLayer("FiInletChannelDrainFittingPlu")
FiInletChannelDrainFittingFrz := FreezeLayer("FiInletChannelDrainFittingPlu")
FiIChanDrainRemovableLayer := layer_new("FiInletChannelDrainRemovablePlu", red)
SelectFiIChanDrainRemovable := SelectLayer("FiInletChannelDrainRemovablePlu")
FiIChanDrainRemovableFrz := FreezeLayer("FiInletChannelDrainRemovablePlu")
# Removable weirs
FiStopGateLayer := layer_new("FiStopGate", orange)
SelectFiStopGate := SelectLayer("FiStopGate")
FiStopGateFrz := FreezeLayer("FiStopGate")
FiSlotStopperLayer := layer_new("FiSlotStopper", orange)
SelectFiSlotStopper := SelectLayer("FiSlotStopper")
FiSlotStopperFrz := FreezeLayer("FiSlotStopper")
FiAirRemovalBaffleLayer := layer_new("FiAirRemovalBaffle", orange)
SelectFiAirRemovalBaffle := SelectLayer("FiAirRemovalBaffle")
FiAirRemovalBaffleFrz := FreezeLayer("FiAirRemovalBaffle")
# Origins
# Added 0.00001 m to Z-coordinates of couplings in the box slab because it was leaving a film of the masonry layer on some couplings (specifically outlet #2 coupling). Couldn't figure out why. abh35 18may2015
FiInletChannel_Origin := [Plant_Origin[0] - L_Sed; Plant_Origin[1] - T_PlantWall; Z_FiEntChannel]
# inlets and outlets numbered from top to bottom
FiEntBox_Origin := FiInletChannel_Origin + [0 m; -W_FiInletChannel - T_PlantWall; 0 m]
FiEntBoxDrain_Origin := FiEntBox_Origin + [
    S_Fitting + OR_Fitting(ND_FiEntBoxDrain);
    -(T_PlantWall + 4*S_Fitting + OR_Fitting(max(ND_FiEntBoxDrain, ND_FiManTrunkLow)) + S_Fitting);
    0 m
]
FiInlet1_Origin := FiEntBox_Origin + [
    2*S_Fitting + OD_Fitting(ND_FiEntBoxDrain) + OR_Fitting(ND_FiManTrunkLow);
    -(T_PlantWall + S_Fitting + 2*S_FiEntranceBaffle + OR_Fitting(max(ND_FiEntBoxDrain, ND_FiManTrunkLow)) + S_Fitting);
    0.00001 m
]
FiInlet2_Origin := FiEntBox_Origin + [
    4*S_Fitting + OD_Fitting(ND_FiEntBoxDrain) + 5*OR_Fitting(ND_FiManTrunkLow);
    -(T_PlantWall + S_Fitting + 2*S_FiEntranceBaffle + OR_Fitting(max(ND_FiEntBoxDrain, ND_FiManTrunkLow)) + S_Fitting);
    0.00001 m
]
FiInlet3_Origin := FiEntBox_Origin + [
    6*S_Fitting + OD_Fitting(ND_FiEntBoxDrain) + 9*OR_Fitting(ND_FiManTrunkLow);
    -(T_PlantWall + S_Fitting + 2*S_FiEntranceBaffle + OR_Fitting(max(ND_FiEntBoxDrain, ND_FiManTrunkLow)) + S_Fitting);
    0.00001 m
]
FiInlet4_Origin := FiEntBox_Origin + [
    8*S_Fitting + OD_Fitting(ND_FiEntBoxDrain) + 6*OD_Fitting(ND_FiManTrunkLow) + OR_Fitting(ND_FiBwTrunkLow);
    -(T_PlantWall + S_Fitting + 2*S_FiEntranceBaffle + OR_Fitting(max(ND_FiEntBoxDrain, ND_FiManTrunkLow)) + S_Fitting);
    0.00001 m
]
FiExitBox_Origin := FiEntBox_Origin + [0 m; -W_FiEntBox - T_PlantWall; 0 m]
FiExitBoxDrain_Origin := FiExitBox_Origin + [S_Fitting + OR_Fitting(ND_FiExitBoxDrain); -W_FiExitBox/2; 0.00001 m]
FiOutlet1_Origin := FiExitBox_Origin + [
    3*S_Fitting + OD_Fitting(ND_FiExitBoxDrain) + 3*OR_Fitting(ND_FiManTrunkLow);
    -W_FiExitBox/2;
    0.00001 m
]
FiOutlet2_Origin := FiExitBox_Origin + [
    5*S_Fitting + OD_Fitting(ND_FiExitBoxDrain) + 7*OR_Fitting(ND_FiManTrunkLow);
    -W_FiExitBox/2;
    0.00001 m
]
FiOutlet3_Origin := FiExitBox_Origin + [
    7*S_Fitting + OD_Fitting(ND_FiExitBoxDrain) + 11*OR_Fitting(ND_FiManTrunkLow);
    -W_FiExitBox/2;
    0.00001 m
]
FiBypassBox_Origin := FiEntBox_Origin + [L_FiEntBox + T_PlantWall; 0 m; 0 m]
FiBypassDrain_Origin := FiBypassBox_Origin + [
    L_FiDistBox/2;
    -(3*S_Fitting + OR_Fitting(max(ND_FiEntBoxDrain, ND_FiManTrunkLow)) + S_Fitting);
    0.00001 m
]
FiDistBox_Origin := FiExitBox_Origin + [L_FiExitBox + T_PlantWall; 0 m; 0 m]
FiDistPipe_Origin := FiDistBox_Origin + [L_FiDistBox/2; -W_FiExitBox/2; 0.00001 m]
FiBodyPipe_Origin := [
    FiExitBox_Origin[0] + OD_Fitting(ND_FiExitBoxDrain) + 7*OR_Fitting(ND_FiManTrunkLow) + 5*S_Fitting;
    FiExitBox_Origin[1] - (W_FiExitBox + T_PlantWall + S_BoxWallToFiPipe + OR(ND_FiPipe));
    Z_FiBottom
]
PlantDC_Origin := [
    Plant_Origin[0] - L_Sed - 2*T_PlantWall - W_PlantDC/2;
    Plant_Origin[1] - 2*T_PlantWall - W_FiInletChannel - W_HumanMin;
    Z_PlantDCBottom
]
# Masonry
DrawFiInletChannel := Tank(FiInletChannel_Origin, [L_FiInletChannel; W_FiInletChannel; H_FiEntTank], T_PlantWall)
RotFiInletChannel := Rotate3DLast(FiInletChannel_Origin, "z", 180 deg)
FiInletChannelConScript := stack(FiInletChannelLayer, DrawFiInletChannel, RotFiInletChannel, FiInletChannelFrz)
DrawSedInletCoupling := CouplingSUBF([
    Plant_Origin[0] + S_Fitting + OR_Fitting(ND_SedLaunder) - L_Sed;
    -SocketDepth(ND_SedLaunder);
    Z_SedLaunder
], [270; 0]*deg, ND_SedLaunder, SDR_26, ["FiInletChannelCon"])
SedInletCouplingScript := stack(FiInletCouplingLayer, DrawSedInletCoupling, FiInletCouplingFrz)
DrawFiEntBox := Tank(FiEntBox_Origin, [L_FiEntBox; W_FiEntBox; H_FiEntTank], T_PlantWall)
RotFiEntBox := Rotate3DLast(FiEntBox_Origin, "z", 180 deg)
FiEntranceBoxSlottedWeir := BoxF(FiEntBox_Origin, FiEntBox_Origin + [L_FiEntBox; -T_FiWeir; H_FiEntTank], [0; 0; 0]*deg)
DrawFiExitBox := Tank(FiExitBox_Origin, [L_FiExitBox; W_FiExitBox; H_FiEntTank], T_PlantWall)
RotFiExitBox := Rotate3DLast(FiExitBox_Origin, "z", 180 deg)
FiEntExitBoxConScript := stack(FiEntExitBoxLayer, DrawFiEntBox, RotFiEntBox, FiEntranceBoxSlottedWeir, DrawFiExitBox, RotFiExitBox, Union_All, FiEntExitBoxFrz)
DrawFiBypassBox := Tank(FiBypassBox_Origin, [L_FiDistBox; W_FiEntBox; H_FiEntTank], T_PlantWall)
RotFiBypassBox := Rotate3DLast(FiBypassBox_Origin, "z", 180 deg)
DrawFiDistBox := Tank(FiDistBox_Origin, [L_FiDistBox; W_FiExitBox; H_FiEntTank], T_PlantWall)
RotFiDistBox := Rotate3DLast(FiDistBox_Origin, "z", 180 deg)
FiAuxBoxConScript := stack(FiAuxBoxLayer, DrawFiBypassBox, RotFiBypassBox, DrawFiDistBox, RotFiDistBox, Union_All, FiAuxBoxFrz)
FiConScript := stack(FiInletChannelConScript, SedInletCouplingScript, FiEntExitBoxConScript, FiAuxBoxConScript)
DrawFiBody := PipeF(FiBodyPipe_Origin, L_FiBodyPipe, [0; 90]*deg, ND_FiPipe, SDR_26)
FiBodyPipe := stack(FiBodyLayer, DrawFiBody, FiBodyFrz)
DrawTopCap := CylinderF(FiBodyPipe_Origin + [0 m; 0 m; L_FiBodyPipe], OR(ND_FiPipe), H_FiCap, [0; 90]*deg)
DrawBotCap := CylinderF(FiBodyPipe_Origin + [0 m; 0 m; -H_FiCap], OR(ND_FiPipe), H_FiCap, [0; 90]*deg)
FiBodyPipeCaps := stack(FiCapLayer, DrawTopCap, DrawBotCap, FiCapFrz)
TopGasketOuter := CylinderF(FiBodyPipe_Origin + [0; 0; L_FiBodyPipe - H_Gasket + H_FiCap], OR(ND_FiPipe) + T_Gasket/2, H_Gasket, [0; 90]*deg)
BotGasketOuter := CylinderF(FiBodyPipe_Origin + [0; 0; -H_FiCap], OR(ND_FiPipe) + T_Gasket/2, H_Gasket, [0; 90]*deg)
GasketCut := CylinderF(FiBodyPipe_Origin + [0; 0; -H_FiCap], OR(ND_FiPipe), L_FiBodyPipe + 2*H_FiCap, [0; 90]*deg)
SubtractGasket := SubtractF(["FiGasket"], "DeleteMe")
FiGasket := stack(FiGasketLayer, TopGasketOuter, BotGasketOuter, FiGasketFrz, GasketCut, GroupDelete, SubtractGasket)
FiAirRelPipeDraw := PipeSUBF(FiBodyPipe_Origin + [0; 0; L_FiBodyPipe], H_FiCap + T_Gasket + SocketDepth(ND_FiAirRelValve), [0; 90]*deg, ND_FiAirRelValve, SDR_13.5, ["FiCap"; "FiGasket"])
FiAirRelValveDraw := insertdwg("https://confluence.cornell.edu/download/attachments/173604905/PvcBallValve+Scaled.dwg", FiBodyPipe_Origin + [0; 0; L_FiBodyPipe + H_FiCap], ND_FiAirRelValve/(2 in), ND_FiAirRelValve/(2 in), 0 deg)
FiAirRelValve := stack(FiAirRelValveLayer, FiAirRelPipeDraw, FiAirRelValveDraw, FiAirRelValveFrz)
FiBody := stack(FiBodyPipe, FiBodyPipeCaps, FiGasket, FiAirRelValve)
# Filter body
# Inlet and outlet plumbing
S_FiBodyPluElbow := OR(ND_FiPipe) + S_BoxWallToFiPipe
# Inlet pipes
FiInlet1Pipe1 := PipeSUBF(FiInlet1_Origin + [0 m; 0 m; -(CouplingLength(ND_FiManTrunkLow) - SocketDepth(ND_FiManTrunkLow))], Z_FiEntTank - Z_FiInlet1 - (CouplingLength(ND_FiManTrunkLow) - SocketDepth(ND_FiManTrunkLow)) - TeeLength(ND_FiManTrunkLow)/2, [0; 270]*deg, ND_FiManTrunkLow, SDR_26, ["FiEntExitBoxCon"])
S_FiBodyInlet1 := FiBodyPipe_Origin[0] - FiInlet1_Origin[0]
FiInlet1Pipe2 := PipeF([FiInlet1_Origin[0]; FiInlet1_Origin[1] - ShortTeeLength(ND_FiManTrunkLow); Z_FiInlet1], FiInlet1_Origin[1] - FiBodyPipe_Origin[1] - ShortTeeLength(ND_FiManTrunkLow) - ElbowRadius(ND_FiManTrunkLow) - S_FiBodyPluElbow, [90; 270]*deg, ND_FiManTrunkLow, SDR_26)
FiInlet1Pipe3 := PipeF([
    FiInlet1_Origin[0] + ElbowRadius(ND_FiManTrunkLow);
    FiBodyPipe_Origin[1] + S_FiBodyPluElbow;
    Z_FiInlet1
], FiBodyPipe_Origin[0] - FiInlet1_Origin[0] - 2*ElbowRadius(ND_FiManTrunkLow), [180; 0]*deg, ND_FiManTrunkLow, SDR_26)
FiInlet1Pipe4 := PipeF([
    FiBodyPipe_Origin[0];
    FiBodyPipe_Origin[1] + S_FiBodyPluElbow - ElbowRadius(ND_FiManTrunkLow);
    Z_FiInlet1
], S_BoxWallToFiPipe - (CouplingLength(ND_FiManTrunkLow) - SocketDepth(ND_FiManTrunkLow)) - ElbowRadius(ND_FiManTrunkLow), [90; 270]*deg, ND_FiManTrunkLow, SDR_26)
FiInlet1PurgeStub := PipeF([FiInlet1_Origin[0]; FiInlet1_Origin[1]; Z_FiInlet1 - TeeLength(ND_FiManTrunkLow)/2], 2*SocketDepth(ND_FiManTrunkLow), [0; 270]*deg, ND_FiManTrunkLow, SDR_26)
FiInlet1RemovableStub := PipeF(FiInlet1_Origin + [0 m; 0 m; -SocketDepth(ND_FiManTrunkLow)], H_FiEntTank + 2*SocketDepth(ND_FiManTrunkLow), [0; 90]*deg, ND_FiManTrunkLow, SDR_26)
FiInlet2Pipe1 := PipeSUBF(FiInlet2_Origin + [0 m; 0 m; -(CouplingLength(ND_FiManTrunkLow) - SocketDepth(ND_FiManTrunkLow))], Z_FiEntTank - Z_FiInlet2 - (CouplingLength(ND_FiManTrunkLow) - SocketDepth(ND_FiManTrunkLow)) - TeeLength(ND_FiManTrunkLow)/2, [0; 270]*deg, ND_FiManTrunkLow, SDR_26, ["FiEntExitBoxCon"])
S_FiBodyInlet2 := FiBodyPipe_Origin[0] - FiInlet2_Origin[0]
FiInlet2Pipe2 := PipeF([FiInlet2_Origin[0]; FiInlet2_Origin[1] - ShortTeeLength(ND_FiManTrunkLow); Z_FiInlet2], S_Fitting + T_PlantWall + W_FiExitBox, [90; 270]*deg, ND_FiManTrunkLow, SDR_26)
FiInlet2Pipe3 := PipeF([
    FiInlet2_Origin[0] + ElbowRadius(ND_FiManTrunkLow)*tan(22.5 deg)/sqrt(2);
    FiInlet2_Origin[1] - ShortTeeLength(ND_FiManTrunkLow) - (S_Fitting + T_PlantWall + W_FiExitBox) - sqrt(2)/2*ElbowRadius(ND_FiManTrunkLow);
    Z_FiInlet2
], sqrt(2)*S_FiBodyInlet2 - 2*ElbowRadius(ND_FiManTrunkLow)*tan(22.5 deg), [135; 0]*deg, ND_FiManTrunkLow, SDR_26)
FiInlet2Pipe4 := PipeF([
    FiBodyPipe_Origin[0];
    FiInlet2_Origin[1] - ShortTeeLength(ND_FiManTrunkLow) - (S_Fitting + T_PlantWall + W_FiExitBox) - S_FiBodyInlet2 - sqrt(2)/2*ElbowRadius(ND_FiManTrunkLow);
    Z_FiInlet2
], FiInlet2_Origin[1] - ShortTeeLength(ND_FiManTrunkLow) - (S_Fitting + T_PlantWall + W_FiExitBox) - S_FiBodyInlet2 - sqrt(2)/2*ElbowRadius(ND_FiManTrunkLow) - FiBodyPipe_Origin[1] - (CouplingLength(ND_FiManTrunkLow) - SocketDepth(ND_FiManTrunkLow)) - OR(ND_FiPipe), [90; 270]*deg, ND_FiManTrunkLow, SDR_26)
FiInlet2PurgeStub := PipeF([FiInlet2_Origin[0]; FiInlet2_Origin[1]; Z_FiInlet2 - TeeLength(ND_FiManTrunkLow)/2], 2*SocketDepth(ND_FiManTrunkLow), [0; 270]*deg, ND_FiManTrunkLow, SDR_26)
FiInlet2RemovableStub := PipeF(FiInlet2_Origin + [0 m; 0 m; -SocketDepth(ND_FiManTrunkLow)], H_FiEntTank + 2*SocketDepth(ND_FiManTrunkLow), [0; 90]*deg, ND_FiManTrunkLow, SDR_26)
FiInlet3Pipe1 := PipeSUBF(FiInlet3_Origin + [0 m; 0 m; -(CouplingLength(ND_FiManTrunkLow) - SocketDepth(ND_FiManTrunkLow))], Z_FiEntTank - Z_FiInlet3 - (CouplingLength(ND_FiManTrunkLow) - SocketDepth(ND_FiManTrunkLow)) - TeeLength(ND_FiManTrunkLow)/2, [0; 270]*deg, ND_FiManTrunkLow, SDR_26, ["FiEntExitBoxCon"])
S_FiBodyInlet3 := FiInlet3_Origin[0] - FiBodyPipe_Origin[0]
FiInlet3Pipe2 := PipeF([FiInlet3_Origin[0]; FiInlet3_Origin[1] - ShortTeeLength(ND_FiManTrunkLow); Z_FiInlet3], S_Fitting + T_PlantWall + W_FiExitBox, [90; 270]*deg, ND_FiManTrunkLow, SDR_26)
FiInlet3Pipe3 := PipeF([
    FiInlet3_Origin[0] - ElbowRadius(ND_FiManTrunkLow)*tan(22.5 deg)/sqrt(2);
    FiInlet3_Origin[1] - ShortTeeLength(ND_FiManTrunkLow) - (S_Fitting + T_PlantWall + W_FiExitBox) - sqrt(2)/2*ElbowRadius(ND_FiManTrunkLow);
    Z_FiInlet3
], sqrt(2)*S_FiBodyInlet3 - 2*ElbowRadius(ND_FiManTrunkLow)*tan(22.5 deg), [45; 0]*deg, ND_FiManTrunkLow, SDR_26)
FiInlet3Pipe4 := PipeF([
    FiBodyPipe_Origin[0];
    FiInlet3_Origin[1] - ShortTeeLength(ND_FiManTrunkLow) - (S_Fitting + T_PlantWall + W_FiExitBox) - S_FiBodyInlet3 - sqrt(2)/2*ElbowRadius(ND_FiManTrunkLow);
    Z_FiInlet3
], FiInlet3_Origin[1] - ShortTeeLength(ND_FiManTrunkLow) - (S_Fitting + T_PlantWall + W_FiExitBox) - S_FiBodyInlet2 - sqrt(2)/2*ElbowRadius(ND_FiManTrunkLow) - FiBodyPipe_Origin[1] - (CouplingLength(ND_FiManTrunkLow) - SocketDepth(ND_FiManTrunkLow)) - OR(ND_FiPipe), [90; 270]*deg, ND_FiManTrunkLow, SDR_26)
FiInlet3PurgeStub := PipeF([FiInlet3_Origin[0]; FiInlet3_Origin[1]; Z_FiInlet3 - TeeLength(ND_FiManTrunkLow)/2], 2*SocketDepth(ND_FiManTrunkLow), [0; 270]*deg, ND_FiManTrunkLow, SDR_26)
FiInlet3RemovableStub := PipeF(FiInlet3_Origin + [0 m; 0 m; -SocketDepth(ND_FiManTrunkLow)], H_FiEntTank + 2*SocketDepth(ND_FiManTrunkLow), [0; 90]*deg, ND_FiManTrunkLow, SDR_26)
FiInlet4Pipe1 := PipeSUBF(FiInlet4_Origin + [0 m; 0 m; -(CouplingLength(ND_FiBwTrunkLow) - SocketDepth(ND_FiBwTrunkLow))], Z_FiEntTank - Z_FiInlet4 - (CouplingLength(ND_FiBwTrunkLow) - SocketDepth(ND_FiBwTrunkLow)) - TeeLength(ND_FiBwTrunkLow)/2, [0; 270]*deg, ND_FiBwTrunkLow, SDR_26, ["FiEntExitBoxCon"])
S_FiBodyInlet4 := FiInlet4_Origin[0] - FiBodyPipe_Origin[0]
FiInlet4Pipe2 := PipeF([FiInlet4_Origin[0]; FiInlet4_Origin[1] - ShortTeeLength(ND_FiBwTrunkLow); Z_FiInlet4], FiInlet4_Origin[1] - FiBodyPipe_Origin[1] - ShortTeeLength(ND_FiBwTrunkLow) - ElbowRadius(ND_FiBwTrunkLow) - S_FiBodyPluElbow, [90; 270]*deg, ND_FiBwTrunkLow, SDR_26)
FiInlet4Pipe3 := PipeF([
    FiInlet4_Origin[0] - ElbowRadius(ND_FiBwTrunkLow);
    FiBodyPipe_Origin[1] + S_FiBodyPluElbow;
    Z_FiInlet4
], FiInlet4_Origin[0] - FiBodyPipe_Origin[0] - 2*ElbowRadius(ND_FiBwTrunkLow), [0; 0]*deg, ND_FiBwTrunkLow, SDR_26)
FiInlet4Pipe4 := PipeF([
    FiBodyPipe_Origin[0];
    FiBodyPipe_Origin[1] + S_FiBodyPluElbow - ElbowRadius(ND_FiBwTrunkLow);
    Z_FiInlet4
], S_BoxWallToFiPipe - (CouplingLength(ND_FiBwTrunkLow) - SocketDepth(ND_FiBwTrunkLow)) - ElbowRadius(ND_FiBwTrunkLow), [90; 270]*deg, ND_FiBwTrunkLow, SDR_26)
FiInlet4PurgeStub := PipeF([FiInlet4_Origin[0]; FiInlet4_Origin[1]; Z_FiInlet4 - TeeLength(ND_FiBwTrunkLow)/2], 2*SocketDepth(ND_FiBwTrunkLow), [0; 270]*deg, ND_FiBwTrunkLow, SDR_26)
FiInlet4RemovableStub := PipeF(FiInlet4_Origin + [0 m; 0 m; -SocketDepth(ND_FiBwTrunkLow)], H_FiEntTank + 2*SocketDepth(ND_FiBwTrunkLow), [0; 90]*deg, ND_FiBwTrunkLow, SDR_26)
FiInletPipes := stack(FiPluPipeLayer, FiInlet1Pipe1, FiInlet1Pipe2, FiInlet1Pipe3, FiInlet1Pipe4, FiInlet1PurgeStub, FiInlet2Pipe1, FiInlet2Pipe2, FiInlet2Pipe3, FiInlet2Pipe4, FiInlet2PurgeStub, FiInlet3Pipe1, FiInlet3Pipe2, FiInlet3Pipe3, FiInlet3Pipe4, FiInlet3PurgeStub, FiInlet4Pipe1, FiInlet4Pipe2, FiInlet4Pipe3, FiInlet4Pipe4, FiInlet4PurgeStub)
FiInletRemovableStubs := stack(FiPluRemovableLayer, FiInlet1RemovableStub, FiInlet2RemovableStub, FiInlet3RemovableStub, FiInlet4RemovableStub, FiPluRemovableFrz)
# Outlet pipes
FiOutlet1Pipe1 := PipeSUBF(FiOutlet1_Origin + [0 m; 0 m; -(CouplingLength(ND_FiManTrunkLow) - SocketDepth(ND_FiManTrunkLow))], Z_FiEntTank - Z_FiOutlet1 - (CouplingLength(ND_FiManTrunkLow) - SocketDepth(ND_FiManTrunkLow)) - TeeLength(ND_FiManTrunkLow)/2, [0; 270]*deg, ND_FiManTrunkLow, SDR_26, ["FiEntExitBoxCon"])
S_FiBodyOutlet1 := FiBodyPipe_Origin[0] - FiOutlet1_Origin[0]
FiOutlet1Pipe2 := PipeF([FiOutlet1_Origin[0]; FiOutlet1_Origin[1] - ShortTeeLength(ND_FiManTrunkLow); Z_FiOutlet1], FiOutlet1_Origin[1] - FiBodyPipe_Origin[1] - ShortTeeLength(ND_FiManTrunkLow) - ElbowRadius(ND_FiManTrunkLow) - S_FiBodyPluElbow, [90; 270]*deg, ND_FiManTrunkLow, SDR_26)
FiOutlet1Pipe3 := PipeF([
    FiOutlet1_Origin[0] + ElbowRadius(ND_FiManTrunkLow);
    FiBodyPipe_Origin[1] + S_FiBodyPluElbow;
    Z_FiOutlet1
], FiBodyPipe_Origin[0] - FiOutlet1_Origin[0] - 2*ElbowRadius(ND_FiManTrunkLow), [180; 0]*deg, ND_FiManTrunkLow, SDR_26)
FiOutlet1Pipe4 := PipeF([
    FiBodyPipe_Origin[0];
    FiBodyPipe_Origin[1] + S_FiBodyPluElbow - ElbowRadius(ND_FiManTrunkLow);
    Z_FiOutlet1
], S_BoxWallToFiPipe - (CouplingLength(ND_FiManTrunkLow) - SocketDepth(ND_FiManTrunkLow)) - ElbowRadius(ND_FiManTrunkLow), [90; 270]*deg, ND_FiManTrunkLow, SDR_26)
FiOutlet1PurgeStub := PipeF([FiOutlet1_Origin[0]; FiOutlet1_Origin[1]; Z_FiOutlet1 - TeeLength(ND_FiManTrunkLow)/2], 2*SocketDepth(ND_FiManTrunkLow), [0; 270]*deg, ND_FiManTrunkLow, SDR_26)
FiOutlet2Pipe1 := PipeSUBF(FiOutlet2_Origin + [0 m; 0 m; -(CouplingLength(ND_FiManTrunkLow) - SocketDepth(ND_FiManTrunkLow))], Z_FiEntTank - Z_FiOutlet2 - (CouplingLength(ND_FiManTrunkLow) - SocketDepth(ND_FiManTrunkLow)) - TeeLength(ND_FiManTrunkLow)/2, [0; 270]*deg, ND_FiManTrunkLow, SDR_26, ["FiEntExitBoxCon"])
FiOutlet2Pipe2 := PipeF([FiOutlet2_Origin[0]; FiOutlet2_Origin[1] - ShortTeeLength(ND_FiManTrunkLow); Z_FiOutlet2], FiOutlet2_Origin[1] - FiBodyPipe_Origin[1] - ShortTeeLength(ND_FiManTrunkLow) - (CouplingLength(ND_FiManTrunkLow) - SocketDepth(ND_FiManTrunkLow)) - OR(ND_FiPipe), [90; 270]*deg, ND_FiManTrunkLow, SDR_26)
FiOutlet2PurgeStub := PipeF([FiOutlet2_Origin[0]; FiOutlet2_Origin[1]; Z_FiOutlet2 - TeeLength(ND_FiManTrunkLow)/2], 2*SocketDepth(ND_FiManTrunkLow), [0; 270]*deg, ND_FiManTrunkLow, SDR_26)
FiOutlet3Pipe1 := PipeSUBF(FiOutlet3_Origin + [0 m; 0 m; -(CouplingLength(ND_FiManTrunkLow) - SocketDepth(ND_FiManTrunkLow))], Z_FiEntTank - Z_FiOutlet3 - (CouplingLength(ND_FiManTrunkLow) - SocketDepth(ND_FiManTrunkLow)) - TeeLength(ND_FiManTrunkLow)/2, [0; 270]*deg, ND_FiManTrunkLow, SDR_26, ["FiEntExitBoxCon"])
S_FiBodyOutlet3 := FiBodyPipe_Origin[0] - FiOutlet3_Origin[0]
FiOutlet3Pipe2 := PipeF([FiOutlet3_Origin[0]; FiOutlet3_Origin[1] - ShortTeeLength(ND_FiManTrunkLow); Z_FiOutlet3], FiOutlet3_Origin[1] - FiBodyPipe_Origin[1] - ShortTeeLength(ND_FiManTrunkLow) - ElbowRadius(ND_FiManTrunkLow) - S_FiBodyPluElbow, [90; 270]*deg, ND_FiManTrunkLow, SDR_26)
FiOutlet3Pipe3 := PipeF([
    FiOutlet3_Origin[0] - ElbowRadius(ND_FiManTrunkLow);
    FiBodyPipe_Origin[1] + S_FiBodyPluElbow;
    Z_FiOutlet3
], FiOutlet3_Origin[0] - FiBodyPipe_Origin[0] - 2*ElbowRadius(ND_FiManTrunkLow), [0; 0]*deg, ND_FiManTrunkLow, SDR_26)
FiOutlet3Pipe4 := PipeF([
    FiBodyPipe_Origin[0];
    FiBodyPipe_Origin[1] + S_FiBodyPluElbow - ElbowRadius(ND_FiManTrunkLow);
    Z_FiOutlet3
], S_BoxWallToFiPipe - (CouplingLength(ND_FiManTrunkLow) - SocketDepth(ND_FiManTrunkLow)) - ElbowRadius(ND_FiManTrunkLow), [90; 270]*deg, ND_FiManTrunkLow, SDR_26)
FiOutlet3PurgeStub := PipeF([FiOutlet3_Origin[0]; FiOutlet3_Origin[1]; Z_FiOutlet3 - TeeLength(ND_FiManTrunkLow)/2], 2*SocketDepth(ND_FiManTrunkLow), [0; 270]*deg, ND_FiManTrunkLow, SDR_26)
FiOutletPipes := stack(FiOutlet1Pipe1, FiOutlet1Pipe2, FiOutlet1Pipe3, FiOutlet1Pipe4, FiOutlet1PurgeStub, FiOutlet2Pipe1, FiOutlet2Pipe2, FiOutlet2PurgeStub, FiOutlet3Pipe1, FiOutlet3Pipe2, FiOutlet3Pipe3, FiOutlet3Pipe4, FiOutlet3PurgeStub, FiPluPipeFrz)
FiPluPipes := stack(FiInletPipes, FiOutletPipes, FiInletRemovableStubs)
# Inlet Fittings
FiInlet1Coupling1 := CouplingSUBF(FiInlet1_Origin + [0 m; 0 m; -SocketDepth(ND_FiManTrunkLow)], [0; 270]*deg, ND_FiManTrunkLow, SDR_26, ["FiEntExitBoxCon"])
FiInlet1Tee := TeeF([FiInlet1_Origin[0]; FiInlet1_Origin[1] - ShortTeeLength(ND_FiManTrunkLow); Z_FiInlet1], [90; 90; 90]*deg, ND_FiManTrunkLow, SDR_26)
FiInlet1Elbow1 := ElbowF([
    FiInlet1_Origin[0];
    FiBodyPipe_Origin[1] + S_FiBodyPluElbow + ElbowRadius(ND_FiManTrunkLow);
    Z_FiInlet1
], [180; 0; 0]*deg, ND_FiManTrunkLow, SDR_26)
FiInlet1Elbow2 := ElbowF([
    FiBodyPipe_Origin[0];
    FiBodyPipe_Origin[1] + S_FiBodyPluElbow - ElbowRadius(ND_FiManTrunkLow);
    Z_FiInlet1
], [0; 0; 0]*deg, ND_FiManTrunkLow, SDR_26)
FiInlet1Coupling2 := CouplingF([
    FiBodyPipe_Origin[0];
    FiBodyPipe_Origin[1] + OR(ND_FiPipe) + SocketDepth(ND_FiManTrunkLow);
    Z_FiInlet1
], [270; 0]*deg, ND_FiManTrunkLow, SDR_26)
FiInlet2Coupling1 := CouplingSUBF(FiInlet2_Origin + [0 m; 0 m; -SocketDepth(ND_FiManTrunkLow)], [0; 270]*deg, ND_FiManTrunkLow, SDR_26, ["FiEntExitBoxCon"])
FiInlet2Tee := TeeF([FiInlet2_Origin[0]; FiInlet2_Origin[1] - ShortTeeLength(ND_FiManTrunkLow); Z_FiInlet2], [90; 90; 90]*deg, ND_FiManTrunkLow, SDR_26)
FiInlet2Elbow1 := Elbow45F([
    FiInlet2_Origin[0];
    FiInlet2_Origin[1] - ShortTeeLength(ND_FiManTrunkLow) - (S_Fitting + T_PlantWall + W_FiExitBox);
    Z_FiInlet2
], [180; 0; 0]*deg, ND_FiManTrunkLow, SDR_26)
FiInlet2Elbow2 := Elbow45F([
    FiBodyPipe_Origin[0];
    FiInlet2_Origin[1] - ShortTeeLength(ND_FiManTrunkLow) - (S_Fitting + T_PlantWall + W_FiExitBox) - S_FiBodyInlet2 - sqrt(2)/2*ElbowRadius(ND_FiManTrunkLow);
    Z_FiInlet2
], [0; 0; 0]*deg, ND_FiManTrunkLow, SDR_26)
FiInlet2Coupling2 := CouplingF([
    FiBodyPipe_Origin[0];
    FiBodyPipe_Origin[1] + OR(ND_FiPipe) + (CouplingLength(ND_FiManTrunkLow) - SocketDepth(ND_FiManTrunkLow));
    Z_FiInlet2
], [90; 0]*deg, ND_FiManTrunkLow, SDR_26)
FiInlet3Coupling1 := CouplingSUBF(FiInlet3_Origin + [0 m; 0 m; -SocketDepth(ND_FiManTrunkLow)], [0; 270]*deg, ND_FiManTrunkLow, SDR_26, ["FiEntExitBoxCon"])
FiInlet3Tee := TeeF([FiInlet3_Origin[0]; FiInlet3_Origin[1] - ShortTeeLength(ND_FiManTrunkLow); Z_FiInlet3], [90; 90; 90]*deg, ND_FiManTrunkLow, SDR_26)
FiInlet3Elbow1 := Elbow45F([
    FiInlet3_Origin[0];
    FiInlet3_Origin[1] - ShortTeeLength(ND_FiManTrunkLow) - (S_Fitting + T_PlantWall + W_FiExitBox);
    Z_FiInlet3
], [180; 180; 0]*deg, ND_FiManTrunkLow, SDR_26)
FiInlet3Elbow2 := Elbow45F([
    FiBodyPipe_Origin[0];
    FiInlet3_Origin[1] - ShortTeeLength(ND_FiManTrunkLow) - (S_Fitting + T_PlantWall + W_FiExitBox) - S_FiBodyInlet3 - sqrt(2)/2*ElbowRadius(ND_FiManTrunkLow);
    Z_FiInlet3
], [0; 180; 0]*deg, ND_FiManTrunkLow, SDR_26)
FiInlet3Coupling2 := CouplingF([
    FiBodyPipe_Origin[0];
    FiBodyPipe_Origin[1] + OR(ND_FiPipe) + (CouplingLength(ND_FiManTrunkLow) - SocketDepth(ND_FiManTrunkLow));
    Z_FiInlet3
], [90; 0]*deg, ND_FiManTrunkLow, SDR_26)
FiInlet4Coupling1 := CouplingSUBF(FiInlet4_Origin + [0 m; 0 m; -SocketDepth(ND_FiBwTrunkLow)], [0; 270]*deg, ND_FiBwTrunkLow, SDR_26, ["FiEntExitBoxCon"])
FiInlet4Tee := TeeF([FiInlet4_Origin[0]; FiInlet4_Origin[1] - ShortTeeLength(ND_FiBwTrunkLow); Z_FiInlet4], [90; 90; 90]*deg, ND_FiBwTrunkLow, SDR_26)
FiInlet4Elbow1 := ElbowF([
    FiInlet4_Origin[0];
    FiBodyPipe_Origin[1] + S_FiBodyPluElbow + ElbowRadius(ND_FiBwTrunkLow);
    Z_FiInlet4
], [180; 180; 0]*deg, ND_FiBwTrunkLow, SDR_26)
FiInlet4Elbow2 := ElbowF([
    FiBodyPipe_Origin[0];
    FiBodyPipe_Origin[1] + S_FiBodyPluElbow - ElbowRadius(ND_FiBwTrunkLow);
    Z_FiInlet4
], [0; 180; 0]*deg, ND_FiBwTrunkLow, SDR_26)
FiInlet4Coupling2 := CouplingF([
    FiBodyPipe_Origin[0];
    FiBodyPipe_Origin[1] + OR(ND_FiPipe) + SocketDepth(ND_FiBwTrunkLow);
    Z_FiInlet4
], [270; 0]*deg, ND_FiBwTrunkLow, SDR_26)
FiInletFittings := stack(FiPluFittingsLayer, FiInlet1Coupling1, FiInlet1Tee, FiInlet1Elbow1, FiInlet1Elbow2, FiInlet1Coupling2, FiInlet2Coupling1, FiInlet2Tee, FiInlet2Elbow1, FiInlet2Elbow2, FiInlet2Coupling2, FiInlet3Coupling1, FiInlet3Tee, FiInlet3Elbow1, FiInlet3Elbow2, FiInlet3Coupling2, FiInlet4Coupling1, FiInlet4Tee, FiInlet4Elbow1, FiInlet4Elbow2, FiInlet4Coupling2)
# Outlet fittings
FiOutlet1Coupling1 := CouplingSUBF(FiOutlet1_Origin + [0 m; 0 m; -SocketDepth(ND_FiManTrunkLow)], [0; 270]*deg, ND_FiManTrunkLow, SDR_26, ["FiEntExitBoxCon"])
FiOutlet1Tee := TeeF([FiOutlet1_Origin[0]; FiOutlet1_Origin[1] - ShortTeeLength(ND_FiManTrunkLow); Z_FiOutlet1], [90; 90; 90]*deg, ND_FiManTrunkLow, SDR_26)
FiOutlet1Elbow1 := ElbowF([
    FiOutlet1_Origin[0];
    FiBodyPipe_Origin[1] + S_FiBodyPluElbow + ElbowRadius(ND_FiManTrunkLow);
    Z_FiOutlet1
], [180; 0; 0]*deg, ND_FiManTrunkLow, SDR_26)
FiOutlet1Elbow2 := ElbowF([
    FiBodyPipe_Origin[0];
    FiBodyPipe_Origin[1] + S_FiBodyPluElbow - ElbowRadius(ND_FiManTrunkLow);
    Z_FiOutlet1
], [0; 0; 0]*deg, ND_FiManTrunkLow, SDR_26)
FiOutlet1Coupling2 := CouplingF([
    FiBodyPipe_Origin[0];
    FiBodyPipe_Origin[1] + OR(ND_FiPipe) + SocketDepth(ND_FiManTrunkLow);
    Z_FiOutlet1
], [270; 0]*deg, ND_FiManTrunkLow, SDR_26)
FiOutlet2Coupling1 := CouplingSUBF(FiOutlet2_Origin + [0 m; 0 m; -SocketDepth(ND_FiManTrunkLow)], [0; 270]*deg, ND_FiManTrunkLow, SDR_26, ["FiEntExitBoxCon"])
FiOutlet2Tee := TeeF([FiOutlet2_Origin[0]; FiOutlet2_Origin[1] - ShortTeeLength(ND_FiManTrunkLow); Z_FiOutlet2], [90; 90; 90]*deg, ND_FiManTrunkLow, SDR_26)
FiOutlet2Coupling2 := CouplingF([
    FiBodyPipe_Origin[0];
    FiBodyPipe_Origin[1] + OR(ND_FiPipe) + SocketDepth(ND_FiManTrunkLow);
    Z_FiOutlet2
], [270; 0]*deg, ND_FiManTrunkLow, SDR_26)
FiOutlet3Coupling1 := CouplingSUBF(FiOutlet3_Origin + [0 m; 0 m; -SocketDepth(ND_FiManTrunkLow)], [0; 270]*deg, ND_FiManTrunkLow, SDR_26, ["FiEntExitBoxCon"])
FiOutlet3Tee := TeeF([FiOutlet3_Origin[0]; FiOutlet3_Origin[1] - ShortTeeLength(ND_FiManTrunkLow); Z_FiOutlet3], [90; 90; 90]*deg, ND_FiManTrunkLow, SDR_26)
FiOutlet3Elbow1 := ElbowF([
    FiOutlet3_Origin[0];
    FiBodyPipe_Origin[1] + S_FiBodyPluElbow + ElbowRadius(ND_FiManTrunkLow);
    Z_FiOutlet3
], [180; 180; 0]*deg, ND_FiManTrunkLow, SDR_26)
FiOutlet3Elbow2 := ElbowF([
    FiBodyPipe_Origin[0];
    FiBodyPipe_Origin[1] + S_FiBodyPluElbow - ElbowRadius(ND_FiManTrunkLow);
    Z_FiOutlet3
], [0; 180; 0]*deg, ND_FiManTrunkLow, SDR_26)
FiOutlet3Coupling2 := CouplingF([
    FiBodyPipe_Origin[0];
    FiBodyPipe_Origin[1] + OR(ND_FiPipe) + SocketDepth(ND_FiManTrunkLow);
    Z_FiOutlet3
], [270; 0]*deg, ND_FiManTrunkLow, SDR_26)
FiOutletFittings := stack(FiOutlet1Coupling1, FiOutlet1Tee, FiOutlet1Elbow1, FiOutlet1Elbow2, FiOutlet1Coupling2, FiOutlet2Coupling1, FiOutlet2Tee, FiOutlet2Coupling2, FiOutlet3Coupling1, FiOutlet3Tee, FiOutlet3Elbow1, FiOutlet3Elbow2, FiOutlet3Coupling2, FiPluFittingsFrz)
FiPluFittings := stack(FiInletFittings, FiOutletFittings)
# Purge valves
Π_PurgeValves := OD(ND_FiManTrunkLow)/(3.439*in)
Π_PurgeValvesBw := OD(ND_FiBwTrunkLow)/(3.439*in)
DrawInlet1PurgeValve := insertdwg("https://confluence.cornell.edu/download/attachments/173604905/PvcBallValve+Scaled.dwg", [
    FiInlet1_Origin[0];
    FiInlet1_Origin[1];
    Z_FiInlet1 - TeeLength(ND_FiManTrunkLow)/2 - SocketDepth(ND_FiManTrunkLow) - ChkValveLength(ND_FiManTrunkLow)
], Π_PurgeValves, Π_PurgeValves, 0 deg)
RotInlet1PurgeValve := Rotate3DLast(FiInlet1_Origin, "z", 180 deg)
DrawInlet2PurgeValve := insertdwg("https://confluence.cornell.edu/download/attachments/173604905/PvcBallValve+Scaled.dwg", [
    FiInlet2_Origin[0];
    FiInlet2_Origin[1];
    Z_FiInlet2 - TeeLength(ND_FiManTrunkLow)/2 - SocketDepth(ND_FiManTrunkLow) - ChkValveLength(ND_FiManTrunkLow)
], Π_PurgeValves, Π_PurgeValves, 0 deg)
RotInlet2PurgeValve := Rotate3DLast(FiInlet2_Origin, "z", 180 deg)
DrawInlet3PurgeValve := insertdwg("https://confluence.cornell.edu/download/attachments/173604905/PvcBallValve+Scaled.dwg", [
    FiInlet3_Origin[0];
    FiInlet3_Origin[1];
    Z_FiInlet3 - TeeLength(ND_FiManTrunkLow)/2 - SocketDepth(ND_FiManTrunkLow) - ChkValveLength(ND_FiManTrunkLow)
], Π_PurgeValves, Π_PurgeValves, 0 deg)
RotInlet3PurgeValve := Rotate3DLast(FiInlet3_Origin, "z", 180 deg)
DrawInlet4PurgeValve := insertdwg("https://confluence.cornell.edu/download/attachments/173604905/PvcBallValve+Scaled.dwg", [
    FiInlet4_Origin[0];
    FiInlet4_Origin[1];
    Z_FiInlet4 - TeeLength(ND_FiBwTrunkLow)/2 - SocketDepth(ND_FiBwTrunkLow) - ChkValveLength(ND_FiBwTrunkLow)
], Π_PurgeValvesBw, Π_PurgeValvesBw, 0 deg)
RotInlet4PurgeValve := Rotate3DLast(FiInlet4_Origin, "z", 180 deg)
DrawOutlet1PurgeValve := insertdwg("https://confluence.cornell.edu/download/attachments/173604905/PvcBallValve+Scaled.dwg", [
    FiOutlet1_Origin[0];
    FiOutlet1_Origin[1];
    Z_FiOutlet1 - TeeLength(ND_FiBwTrunkLow)/2 - SocketDepth(ND_FiBwTrunkLow) - ChkValveLength(ND_FiBwTrunkLow)
], Π_PurgeValves, Π_PurgeValves, 0 deg)
RotOutlet1PurgeValve := Rotate3DLast(FiOutlet1_Origin, "z", 180 deg)
DrawOutlet2PurgeValve := insertdwg("https://confluence.cornell.edu/download/attachments/173604905/PvcBallValve+Scaled.dwg", [
    FiOutlet2_Origin[0];
    FiOutlet2_Origin[1];
    Z_FiOutlet2 - TeeLength(ND_FiManTrunkLow)/2 - SocketDepth(ND_FiManTrunkLow) - ChkValveLength(ND_FiManTrunkLow)
], Π_PurgeValves, Π_PurgeValves, 0 deg)
RotOutlet2PurgeValve := Rotate3DLast(FiOutlet2_Origin, "z", 180 deg)
DrawOutlet3PurgeValve := insertdwg("https://confluence.cornell.edu/download/attachments/173604905/PvcBallValve+Scaled.dwg", [
    FiOutlet3_Origin[0];
    FiOutlet3_Origin[1];
    Z_FiOutlet3 - TeeLength(ND_FiManTrunkLow)/2 - SocketDepth(ND_FiManTrunkLow) - ChkValveLength(ND_FiManTrunkLow)
], Π_PurgeValves, Π_PurgeValves, 0 deg)
RotOutlet3PurgeValve := Rotate3DLast(FiOutlet3_Origin, "z", 180 deg)
FiPluValves := stack(FiPluValvesLayer, DrawInlet1PurgeValve, RotInlet1PurgeValve, DrawInlet2PurgeValve, RotInlet2PurgeValve, DrawInlet3PurgeValve, RotInlet3PurgeValve, DrawInlet4PurgeValve, RotInlet4PurgeValve, DrawOutlet1PurgeValve, RotOutlet1PurgeValve, DrawOutlet2PurgeValve, RotOutlet2PurgeValve, DrawOutlet3PurgeValve, RotOutlet3PurgeValve, FiPluValvesFrz)
# Module plumbing
# Rotation Angles for Manifolds (Assume trunks are drawn along negative y axis; rotate around FiBody origin).
AN_InletTrunk4 := 0 deg
AN_OutletTrunk3 := 0 deg
AN_InletTrunk3 := 0 deg
AN_OutletTrunk2 := 0 deg
AN_InletTrunk2 := 0 deg
AN_OutletTrunk1 := 0 deg
AN_InletTrunk1 := 0 deg
AN_OutletTrunk := [AN_OutletTrunk3; AN_OutletTrunk2; AN_OutletTrunk1]
AN_InletTrunk := [AN_InletTrunk4; AN_InletTrunk3; AN_InletTrunk2; AN_InletTrunk1]
FiManOutlet3_Origin := [FiBodyPipe_Origin[0]; FiBodyPipe_Origin[1] + IR(ND_FiPipe, SDR_26) - T_Flange; Z_FiOutlet3]
FiBranch_Origin(i) := [
    FiBodyPipe_Origin[0] + L_FiManBranchLow[i] + OR(ND_FiManTrunkLow);
    FiBodyPipe_Origin[1] + IR(ND_FiPipe, SDR_26) - S_FiBranchFromWall - B_FiManBranch*i;
    FiManOutlet3_Origin[2]
]
FiManInlet4_Origin := [FiBodyPipe_Origin[0]; FiBodyPipe_Origin[1] + IR(ND_FiPipe, SDR_26) - T_Flange; Z_FiInlet4]
FiBwBranch_Origin(i) := [
    FiBodyPipe_Origin[0] + L_FiBwManBranchLow[i] + OR(ND_FiBwTrunkLow);
    FiBodyPipe_Origin[1] + IR(ND_FiPipe, SDR_26) - S_FiBwBranchFromWall - B_FiBwManBranch*i;
    FiManInlet4_Origin[2]
]
DrawFiManAdapter := MaleAdapterF(FiManOutlet3_Origin, [270; 0]*deg, ND_FiManTrunkLow, Sch40)
DrawFiBwManAdapter := MaleAdapterF(FiManInlet4_Origin, [270; 0]*deg, ND_FiBwTrunkLow, Sch40)
FiManAdapter := stack(FiManAdapterLayer, DrawFiManAdapter, FiManAdapterFrz)
FiBwManAdapter := stack(SelectFiManAdapter, DrawFiBwManAdapter, FiManAdapterFrz)
FiManTrunkCap := CapF(FiManOutlet3_Origin + [0; -L_FiManTrunk; 0], [270; 0]*deg, ND_FiManTrunkLow)
FiBwManTrunkCap := CapF(FiManInlet4_Origin + [0; -L_FiBwManTrunk; 0], [270; 0]*deg, ND_FiBwTrunkLow)
FiManTrunkCaps := stack(FiManTrunkCapLayer, FiManTrunkCap, FiManTrunkCapFrz)
FiBwManTrunkCaps := stack(SelectFiManTrunkCap, FiBwManTrunkCap, FiManTrunkCapFrz)
FiManBranchPlu :=
    Local ← view("t")
    for i ∈ 0 .. N_FiManBranchLow - 1
        Local ← stack(Local, PipeF(FiBranch_Origin(i), (L_FiManBranchLow[i] + OR(ND_FiManTrunkLow))*2, [0; 0]*deg, ND_FiManBranchLow, Sch40))
    Local
FiBwManBranchPlu :=
    Local ← view("t")
    for i ∈ 0 .. N_FiManBranchLow - 1
        Local ← stack(Local, PipeF(FiBwBranch_Origin(i), (L_FiBwManBranchLow[i] + OR(ND_FiBwTrunkLow))*2, [0; 0]*deg, ND_FiBwManBranch, Sch40))
    Local
FiBranchCut := BoxF([-L_SlotCut*0.5; 0; L_FiManSlotOuter*0.5] + FiManOutlet3_Origin, [L_SlotCut*0.5; -L_FiManTrunk; -L_FiManSlotOuter*0.5] + FiManOutlet3_Origin, [0; 0; 0]*deg)
FiBwBranchCut := BoxF([-L_SlotCut*0.5; 0; L_FiManSlotOuter*0.5] + FiManInlet4_Origin, [L_SlotCut*0.5; -L_FiBwManTrunk; -L_FiManSlotOuter*0.5] + FiManInlet4_Origin, [0; 0; 0]*deg)
SubtractFiBranches := SubtractF(["FiManBranchPlu"], "DeleteMe")
FiBranches := stack(FiManBranchLayer, FiManBranchPlu, FiManBranchFrz, FiBranchCut, GroupDelete, SubtractFiBranches)
FiBwBranches := stack(SelectFiManBranch, FiBwManBranchPlu, FiManBranchFrz, FiBwBranchCut, GroupDelete, SubtractFiBranches)
FiManBranchCapPlu :=
    Local ← view("t")
    for i ∈ 0 .. N_FiManBranchLow - 1
        Local ← stack(Local, CutCapF(FiBranch_Origin(i), CapHeight(ND_FiManBranchLow), [0; 0]*deg, ND_FiManBranchLow))
    Local
FiBwManBranchCapPlu :=
    Local ← view("t")
    for i ∈ 0 .. N_FiManBranchLow - 1
        Local ← stack(Local, CutCapF(FiBwBranch_Origin(i), CapHeight(ND_FiBwManBranch), [0; 0]*deg, ND_FiBwManBranch))
    Local
MirrorFiManBranchCaps := MirrorAll([FiManInlet4_Origin[0]; FiManInlet4_Origin[1]], [FiManInlet4_Origin[0]; FiManInlet4_Origin[1] + S_Fitting], "n")
FiBranchCaps := stack(FiManBranchCapLayer, FiManBranchCapPlu, FiManBranchCapFrz)
FiBwBranchCaps := stack(SelectFiManBranchCap, FiBwManBranchCapPlu, MirrorFiManBranchCaps, FiManBranchCapFrz)
FiManTrunk := PipeF(FiManOutlet3_Origin, L_FiManTrunk, [90; 0]*deg, ND_FiManTrunkLow, SDR_26)
FiBwManTrunk := PipeF(FiManInlet4_Origin, L_FiBwManTrunk, [90; 0]*deg, ND_FiBwTrunkLow, SDR_26)
FiManTrunks := stack(FiManTrunkLayer, FiManTrunk, FiManTrunkFrz)
FiBwManTrunks := stack(SelectFiManTrunk, FiBwManTrunk, FiManTrunkFrz)
FiManArray := stack(ThawMultiple(["FiMan*Plu"]), view("f"), Array_All(N_FiLayer, 1, H_FiLayerLow), FreezeMultiple(["FiMan*Plu"]), view("t"))
FiInletRotate :=
    rot ← stack(ThawMultiple(["FiMan*Plu"]), view("f"))
    for i ∈ 0 .. 3
        rot ←
            if AN_InletTrunk[i] ≠ 0
                stack(rot, stack(concat("rotate3d", sp, "w"), concat(point([
                    FiManInlet4_Origin[0] - ID(ND_FiPipe, SDR_26);
                    FiManInlet4_Origin[2] - 1.1*OR_Fitting(ND_FiManTrunkLow) + 2*H_FiLayerLow*i;
                    0
                ]), sp, point([
                    FiManInlet4_Origin[0] + ID(ND_FiPipe, SDR_26);
                    FiManInlet4_Origin[2] + 1.1*OR_Fitting(ND_FiManTrunkLow) + 2*H_FiLayerLow*i;
                    0
                ]), sp), concat("y", sp, point([FiBodyPipe_Origin[0]; FiBodyPipe_Origin[2]; -FiBodyPipe_Origin[1]][:, 0]), sp, stringit_nounits(AN_InletTrunk[i]/deg))))
            rot otherwise
    rot
FiOutletRotate :=
    rot ← stack(view("f"))
    for i ∈ 0 .. 2
        rot ←
            if AN_OutletTrunk[i] ≠ 0
                stack(rot, stack(concat("rotate3d", sp, "w"), concat(point([
                    FiManInlet4_Origin[0] - ID(ND_FiPipe, SDR_26);
                    FiManInlet4_Origin[2] - 1.1*OR_Fitting(ND_FiManTrunkLow) + 2*H_FiLayerLow*i + H_FiLayerLow;
                    0
                ]), sp, point([
                    FiManInlet4_Origin[0] + ID(ND_FiPipe, SDR_26);
                    FiManInlet4_Origin[2] + 1.1*OR_Fitting(ND_FiManTrunkLow) + H_FiLayerLow + 2*H_FiLayerLow*i;
                    0
                ]), sp), concat("y", sp, point([FiBodyPipe_Origin[0]; FiBodyPipe_Origin[2]; -FiBodyPipe_Origin[1]][:, 0]), sp, stringit_nounits(AN_OutletTrunk[i]/deg))))
            rot otherwise
    rot ← stack(rot, FreezeMultiple(["FiMan*Plu"]))
    rot
FiModulePlumbingUpper := stack(FiManAdapter, FiManTrunkCaps, FiBranches, FiBranchCaps, FiManTrunks, FiManArray)
FiModulePlumbingBw := stack(FiBwManAdapter, FiBwManTrunkCaps, FiBwBranches, FiBwBranchCaps, FiBwManTrunks, FiInletRotate, FiOutletRotate, view("t"))
FiModulePlumbing := stack(FiModulePlumbingUpper, FiModulePlumbingBw)
DrawBwPipeOut := PipeSUBF([
    FiBodyPipe_Origin[0] - IR(ND_FiPipe, SDR_26);
    FiBodyPipe_Origin[1];
    Z_FiBwPipe + OR_Fitting(ND_FiBwTrunkLow)
], OR(ND_FiPipe) - IR(ND_FiPipe, SDR_26) + SocketDepth(ND_FiBwTrunkLow), [0; 0]*deg, ND_FiBwTrunkLow, SDR_26, ["FiBodyPlu"])
DrawBwPipeHoriz := PipeF([
    FiBodyPipe_Origin[0] - OR(ND_FiPipe) - (CouplingLength(ND_FiBwTrunkLow) - SocketDepth(ND_FiBwTrunkLow));
    FiBodyPipe_Origin[1];
    Z_FiBwPipe + OR_Fitting(ND_FiBwTrunkLow)
], 2*SocketDepth(ND_FiBwTrunkLow), [0; 0]*deg, ND_FiBwTrunkLow, SDR_26)
DrawBwPipeVert := PipeF([
    FiBodyPipe_Origin[0] - OR(ND_FiPipe) - CouplingLength(ND_FiBwTrunkLow) - SocketDepth(ND_FiBwTrunkLow) - ShortTeeLength(ND_FiBwTrunkLow);
    FiBodyPipe_Origin[1];
    Z_FiBwPipe + OR_Fitting(ND_FiBwTrunkLow) - TeeLength(ND_FiBwTrunkLow)/2
], Z_FiBwPipe - Z_FiSiphonOutlet + OR_Fitting(ND_FiBwTrunkLow) - TeeLength(ND_FiBwTrunkLow)/2 - (ChkValveLength(ND_FiBwTrunkLow) - SocketDepth(ND_FiBwTrunkLow)), [0; 270]*deg, ND_FiBwTrunkLow, SDR_26)
DrawBwPipeBendStub1 := PipeF([
    FiBodyPipe_Origin[0] - OR(ND_FiPipe) - CouplingLength(ND_FiBwTrunkLow) - SocketDepth(ND_FiBwTrunkLow) - ShortTeeLength(ND_FiBwTrunkLow);
    FiBodyPipe_Origin[1];
    Z_FiSiphonOutlet + SocketDepth(ND_FiBwTrunkLow)
], 2*SocketDepth(ND_FiBwTrunkLow), [0; 270]*deg, ND_FiBwTrunkLow, SDR_26)
DrawBwPipeBendStub2 := PipeF([
    FiBodyPipe_Origin[0] - OR(ND_FiPipe) - CouplingLength(ND_FiBwTrunkLow) - SocketDepth(ND_FiBwTrunkLow) - ShortTeeLength(ND_FiBwTrunkLow) - ElbowRadius(ND_FiBwTrunkLow);
    FiBodyPipe_Origin[1];
    Z_FiSiphonOutlet - SocketDepth(ND_FiBwTrunkLow) - ElbowRadius(ND_FiBwTrunkLow)
], 2*SocketDepth(ND_FiBwTrunkLow), [0; 0]*deg, ND_FiBwTrunkLow, SDR_26)
DrawBwCouplingOut := CouplingF([
    FiBodyPipe_Origin[0] - OR(ND_FiPipe) - SocketDepth(ND_FiBwTrunkLow);
    FiBodyPipe_Origin[1];
    Z_FiBwPipe + OR_Fitting(ND_FiBwTrunkLow)
], [0; 0; 0]*deg, ND_FiBwTrunkLow, SDR_26)
DrawBwTee := TeeF([
    FiBodyPipe_Origin[0] - OR(ND_FiPipe) - CouplingLength(ND_FiBwTrunkLow) - SocketDepth(ND_FiBwTrunkLow);
    FiBodyPipe_Origin[1];
    Z_FiBwPipe + OR_Fitting(ND_FiBwTrunkLow)
], [270; 0; 90]*deg, ND_FiBwTrunkLow, SDR_26)
DrawBwElbow1 := ElbowF([
    FiBodyPipe_Origin[0] - OR(ND_FiPipe) - CouplingLength(ND_FiBwTrunkLow) - SocketDepth(ND_FiBwTrunkLow) - ShortTeeLength(ND_FiBwTrunkLow);
    FiBodyPipe_Origin[1];
    Z_FiSiphonOutlet - SocketDepth(ND_FiBwTrunkLow)
], [0; 0; 270]*deg, ND_FiBwTrunkLow, SDR_26)
DrawBwElbow2 := ElbowF([
    FiBodyPipe_Origin[0] - OR(ND_FiPipe) - CouplingLength(ND_FiBwTrunkLow) - 3*SocketDepth(ND_FiBwTrunkLow) - ShortTeeLength(ND_FiBwTrunkLow) - 2*ElbowRadius(ND_FiBwTrunkLow);
    FiBodyPipe_Origin[1];
    Z_FiSiphonOutlet - SocketDepth(ND_FiBwTrunkLow)
], [180; 0; 90]*deg, ND_FiBwTrunkLow, SDR_26)
DrawBwAirRelReducer1 := reducerF([
    FiBodyPipe_Origin[0] - OR(ND_FiPipe) - CouplingLength(ND_FiBwTrunkLow) - SocketDepth(ND_FiBwTrunkLow) - ShortTeeLength(ND_FiBwTrunkLow);
    FiBodyPipe_Origin[1];
    Z_FiBwPipe + OR_Fitting(ND_FiBwTrunkLow) + TeeLength(ND_FiBwTrunkLow)/2 + 2*SocketDepth(ND_FiBwTrunkLow)
], [0; 90; 0]*deg, ND_FiBwTrunkLow, 2 in, ReducerLength(ND_FiBwTrunkLow, 2 in), SDR_26)
# Check reducer function, probably doesn't work because this goes to 1/2" pipe and there is a built-in pipe spec there. SDR26 doesn't exist for 1/2" pipe
DrawBwAirRelReducer2 := reducerF([
    FiBodyPipe_Origin[0] - OR(ND_FiPipe) - CouplingLength(ND_FiBwTrunkLow) - SocketDepth(ND_FiBwTrunkLow) - ShortTeeLength(ND_FiBwTrunkLow);
    FiBodyPipe_Origin[1];
    Z_FiBwPipe + OR_Fitting(ND_FiBwTrunkLow) + TeeLength(ND_FiBwTrunkLow)/2 + 4*SocketDepth(ND_FiBwTrunkLow) + ReducerLength(ND_FiBwTrunkLow, 2 in)
], [0; 90; 0]*deg, 2 in, ND_FiAirRelValve, ReducerLength(2 in, ND_FiAirRelValve), SDR_13.5)
Π_BwValve := OD(ND_FiBwTrunkLow)/(3.439*in)
DrawBwValve := insertdwg("https://confluence.cornell.edu/download/attachments/173604905/PvcBallValve+Scaled.dwg", [
    FiBodyPipe_Origin[0] - OR(ND_FiPipe) - CouplingLength(ND_FiBwTrunkLow) - SocketDepth(ND_FiBwTrunkLow) - ShortTeeLength(ND_FiBwTrunkLow);
    FiBodyPipe_Origin[1];
    Z_FiSiphonOutlet
], Π_BwValve, Π_BwValve, 0 deg)
DrawBwAirRelValve := insertdwg("https://confluence.cornell.edu/download/attachments/173604905/PvcBallValve+Scaled.dwg", [
    FiBodyPipe_Origin[0] - OR(ND_FiPipe) - CouplingLength(ND_FiBwTrunkLow) - SocketDepth(ND_FiBwTrunkLow) - ShortTeeLength(ND_FiBwTrunkLow);
    FiBodyPipe_Origin[1];
    Z_FiBwPipe + OR_Fitting(ND_FiBwTrunkLow) + TeeLength(ND_FiBwTrunkLow)/2 + 3*SocketDepth(ND_FiBwTrunkLow) + ReducerLength(ND_FiBwTrunkLow, 2 in)
], ND_FiAirRelValve/(2 in), ND_FiAirRelValve/(2 in), 0 deg)
FiBw := stack(FiBwPipeLayer, DrawBwPipeOut, DrawBwPipeHoriz, DrawBwPipeVert, DrawBwPipeBendStub1, DrawBwPipeBendStub2, FiBwPipeFrz, FiBwFittingLayer, DrawBwCouplingOut, DrawBwTee, DrawBwElbow1, DrawBwElbow2, FiBwFittingFrz, FiBwReducerLayer, DrawBwAirRelReducer1, FiBwReducerFrz, FiBwValveLayer, DrawBwValve, DrawBwAirRelValve, FiBwValveFrz)
# Backwash plumbing
# Bypass plumbing
DrawBypassPipe := PipeSUBF([
    FiDistBox_Origin[0] + L_FiDistBox/2;
    FiDistBox_Origin[1] + (T_PlantWall - (CouplingLength(ND_FiBypass) - SocketDepth(ND_FiBypass)));
    FiDistBox_Origin[2] + H_FiBypassSafety + OR_Fitting(ND_FiBypass)
], T_PlantWall - (CouplingLength(ND_FiBypass) - SocketDepth(ND_FiBypass)), [90; 0]*deg, ND_FiBypass, SDR_26, ["FiAuxBoxCon"])
DrawBypassCoupling := CouplingSUBF([
    FiDistBox_Origin[0] + L_FiDistBox/2;
    FiDistBox_Origin[1] + (T_PlantWall - SocketDepth(ND_FiBypass));
    FiDistBox_Origin[2] + H_FiBypassSafety + OR_Fitting(ND_FiBypass)
], [90; 0; 0]*deg, ND_FiBypass, SDR_26, ["FiAuxBoxCon"])
FiBypassPlu := stack(FiBypassPipeLayer, DrawBypassPipe, FiBypassPipeFrz, FiBypassFittingLayer, DrawBypassCoupling, FiBypassFittingFrz)
DrawDistPipe := PipeSUBF([
    FiDistPipe_Origin[0];
    FiDistPipe_Origin[1];
    FiDistPipe_Origin[2] - (CouplingLength(ND_DistPipe) - SocketDepth(ND_DistPipe))
], T_PlantWall, [0; 270]*deg, ND_DistPipe, SDR_26, ["FiAuxBoxCon"])
DrawDistCoupling := CouplingSUBF([
    FiDistPipe_Origin[0];
    FiDistPipe_Origin[1];
    FiDistPipe_Origin[2] - SocketDepth(ND_DistPipe) + 0.0001 m
], [0; 270; 0]*deg, ND_DistPipe, SDR_26, ["FiAuxBoxCon"])
FiDistPlu := stack(FiDistPipeLayer, DrawDistPipe, FiDistPipeFrz, FiDistFittingLayer, DrawDistCoupling, FiDistFittingFrz)
# Distribution plumbing
# Sand drain plumbing
DrawSandDrainPipeOut := PipeSUBF([FiBodyPipe_Origin[0] + IR(ND_FiPipe, SDR_26); FiBodyPipe_Origin[1]; Z_FiInlet4 - S_Fitting], OR(ND_FiPipe) - IR(ND_FiPipe, SDR_26) + S_Fitting - ElbowRadius(ND_FiSandOutlet) + SocketDepth(ND_FiSandOutlet), [0; 180]*deg, ND_FiSandOutlet, SDR_26, ["FiBodyPlu"])
DrawSandDrainPipeVert := PipeF([
    FiBodyPipe_Origin[0] + OR(ND_FiPipe) + ElbowRadius(ND_FiSandOutlet) + SocketDepth(ND_FiSandOutlet);
    FiBodyPipe_Origin[1];
    Z_FiInlet4 - S_Fitting + ElbowRadius(ND_FiSandOutlet)
], W_HumanMin + 2*SocketDepth(ND_FiSandOutlet) - ElbowRadius(ND_FiSandOutlet), [0; 90]*deg, ND_FiSandOutlet, SDR_26)
DrawSandDrainPipeHoriz := PipeF([
    FiBodyPipe_Origin[0] + OR(ND_FiPipe) + 2*ElbowRadius(ND_FiSandOutlet) + SocketDepth(ND_FiSandOutlet);
    FiBodyPipe_Origin[1];
    Z_FiInlet4 - S_Fitting + W_HumanMin + 2*SocketDepth(ND_FiSandOutlet) + ElbowRadius(ND_FiSandOutlet)
], 2*SocketDepth(ND_FiSandOutlet), [0; 180]*deg, ND_FiSandOutlet, SDR_26)
DrawSandDrainPipeStub := PipeF([
    FiBodyPipe_Origin[0] + OR(ND_FiPipe) + 3*SocketDepth(ND_FiSandOutlet) + 3*ElbowRadius(ND_FiSandOutlet);
    FiBodyPipe_Origin[1];
    Z_FiInlet4 - S_Fitting + W_HumanMin + 2*SocketDepth(ND_FiSandOutlet)
], 2*SocketDepth(ND_FiSandOutlet), [0; 270]*deg, ND_FiSandOutlet, SDR_26)
DrawSandDrainElbow1 := ElbowF([
    FiBodyPipe_Origin[0] + OR(ND_FiPipe) + ElbowRadius(ND_FiSandOutlet) + SocketDepth(ND_FiSandOutlet);
    FiBodyPipe_Origin[1];
    Z_FiInlet4 - S_Fitting + ElbowRadius(ND_FiSandOutlet)
], [0; 0; 270]*deg, ND_FiSandOutlet, SDR_26)
DrawSandDrainElbow2 := ElbowF([
    FiBodyPipe_Origin[0] + OR(ND_FiPipe) + ElbowRadius(ND_FiSandOutlet) + SocketDepth(ND_FiSandOutlet);
    FiBodyPipe_Origin[1];
    Z_FiInlet4 - S_Fitting + W_HumanMin + 2*SocketDepth(ND_FiSandOutlet)
], [180; 0; 270]*deg, ND_FiSandOutlet, SDR_26)
DrawSandDrainElbow3 := ElbowF([
    FiBodyPipe_Origin[0] + OR(ND_FiPipe) + 3*SocketDepth(ND_FiSandOutlet) + 3*ElbowRadius(ND_FiSandOutlet);
    FiBodyPipe_Origin[1];
    Z_FiInlet4 - S_Fitting + W_HumanMin + 2*SocketDepth(ND_FiSandOutlet)
], [0; 0; 90]*deg, ND_FiSandOutlet, SDR_26)
Π_SandDrainValve := OD(ND_FiSandOutlet)/(3.439*in)
DrawSandDrainValve := insertdwg("https://confluence.cornell.edu/download/attachments/173604905/PvcBallValve+Scaled.dwg", [
    FiBodyPipe_Origin[0] + OR(ND_FiPipe) + ElbowRadius(ND_FiSandOutlet) + SocketDepth(ND_FiSandOutlet);
    FiBodyPipe_Origin[1];
    Z_FiInlet4 + W_HumanMin - 3*S_Fitting
], Π_SandDrainValve, Π_SandDrainValve, 0 deg)
FiSandDrain := stack(FiSandDrainPipeLayer, DrawSandDrainPipeOut, DrawSandDrainPipeVert, DrawSandDrainPipeHoriz, DrawSandDrainPipeStub, FiSandDrainPipeFrz, FiSandDrainFittingLayer, DrawSandDrainElbow1, DrawSandDrainElbow2, DrawSandDrainElbow3, FiSandDrainFittingFrz, FiSandDrainValveLayer, DrawSandDrainValve, FiSandDrainValveFrz)
# Drain plumbing
FiExitBoxDrainPipe := PipeSUBF(FiExitBoxDrain_Origin + [0; 0; -(CouplingLength(ND_FiExitBoxDrain) - SocketDepth(ND_FiExitBoxDrain))], T_PlantWall, [0; 270]*deg, ND_FiExitBoxDrain, SDR_26, ["FiEntExitBoxCon"])
FiExitBoxDrainNipple := PipeF(FiExitBoxDrain_Origin + [0; 0; -SocketDepth(ND_FiExitBoxDrain)], H_FiEntTank + 2*SocketDepth(ND_FiExitBoxDrain), [0; 90]*deg, ND_FiExitBoxDrain, SDR_26)
FiDrainPipePlu := stack(FiDrainPipeLayer, FiExitBoxDrainPipe, FiDrainPipeFrz, SelectFiPluRemovable, FiExitBoxDrainNipple, FiPluRemovableFrz)
FiExitBoxDrainCoupling := CouplingSUBF(FiExitBoxDrain_Origin + [0; 0; -SocketDepth(ND_FiExitBoxDrain)], [0; 270]*deg, ND_FiExitBoxDrain, SDR_26, ["FiEntExitBoxCon"])
FiExitBoxDrainFitting := stack(FiDrainFittingLayer, FiExitBoxDrainCoupling, FiDrainFittingFrz)
FiInletChannelBoxDrainPipe := PipeSUBF(FiInletChannel_Origin + [
    L_FiInletChannel/2;
    -W_FiInletChannel/2;
    -(CouplingLength(ND_FiBypassDrain) - SocketDepth(ND_FiBypassDrain))
], T_PlantWall, [0; 270]*deg, ND_FiInletChannelDrain, SDR_26, ["FiInletChannelCon"])
FiInletChannelDrainStub := PipeF(FiInletChannel_Origin + [L_FiInletChannel/2; -W_FiInletChannel/2; -SocketDepth(ND_FiInletChannelDrain)], H_FiEntTank + 2*SocketDepth(ND_FiInletChannelDrain), [0; 90]*deg, ND_FiInletChannelDrain, SDR_26)
FiInletChannelDrainPlu := stack(FiInletChannelDrainPipeLayer, FiInletChannelBoxDrainPipe, FiInletChannelDrainPipeFrz, FiIChanDrainRemovableLayer, FiInletChannelDrainStub, FiIChanDrainRemovableFrz)
FiInletChannelBoxDrainCoupling := CouplingSUBF(FiInletChannel_Origin + [L_FiInletChannel/2; -W_FiInletChannel/2; -SocketDepth(ND_FiBypassDrain)], [0; 270]*deg, ND_FiInletChannelDrain, SDR_26, ["FiInletChannelCon"])
FiInletChannelDrainFitting := stack(FiInletChannelDrainFittingLayer, FiInletChannelBoxDrainCoupling, FiInletChannelDrainFittingFrz)
FiBypassBoxDrainPipe := PipeSUBF(FiBypassDrain_Origin + [0; 0; -(CouplingLength(ND_FiBypassDrain) - SocketDepth(ND_FiBypassDrain))], T_PlantWall, [0; 270]*deg, ND_FiBypassDrain, SDR_26, ["FiAuxBoxCon"])
FiBypassBoxDrainStub := PipeF(FiBypassDrain_Origin + [0; 0; -SocketDepth(ND_FiBypassDrain)], H_FiEntTank + 2*SocketDepth(ND_FiBypassDrain), [0; 90]*deg, ND_FiBypassDrain, SDR_26)
FiBypassDrainPlu := stack(FiBypassDrainPipeLayer, FiBypassBoxDrainPipe, FiBypassDrainPipeFrz, FiBypassDrainRemovableLayer, FiBypassBoxDrainStub, FiBypassDrainRemovableFrz)
FiBypassBoxDrainCoupling := CouplingSUBF(FiBypassDrain_Origin + [0; 0; -SocketDepth(ND_FiBypassDrain)], [0; 270]*deg, ND_FiBypassDrain, SDR_26, ["FiAuxBoxCon"])
FiBypassDrainFitting := stack(FiBypassDrainFittingLayer, FiBypassBoxDrainCoupling, FiBypassDrainFittingFrz)
FiDrainPlumbingScript := stack(FiDrainPipePlu, FiExitBoxDrainFitting, FiInletChannelDrainPlu, FiInletChannelDrainFitting, FiBypassDrainPlu, FiBypassDrainFitting)
# Entrance box weir removables
FiStopGate := BoxF([
    FiInletChannel_Origin[0] + L_FiEntBox/2 - W_FiStopGate/2 - T_Acrylic;
    FiInletChannel_Origin[1] - W_FiInletChannel - T_FiWeir/2 + T_Acrylic/2;
    Z_FiEntWeir - H_FiStopGate
], [
    FiInletChannel_Origin[0] + L_FiEntBox/2 + W_FiStopGate/2 + T_Acrylic;
    FiInletChannel_Origin[1] - W_FiInletChannel - T_FiWeir/2 - T_Acrylic/2;
    Z_FiEntWeir
], [0; 0; 0]*deg)
FiSlotStopper := BoxF([
    FiInletChannel_Origin[0] + L_FiEntBox/2 - W_FiBwFlowControl/2 - T_Acrylic;
    FiInletChannel_Origin[1] - W_FiInletChannel - T_PlantWall - T_FiWeir/2 + T_Acrylic/2;
    Z_FiBwFlowControl - N_FiSlotStopper*H_FiSlotStopper
], [
    FiInletChannel_Origin[0] + L_FiEntBox/2 + W_FiBwFlowControl/2 + T_Acrylic;
    FiInletChannel_Origin[1] - W_FiInletChannel - T_PlantWall - T_FiWeir/2 - T_Acrylic/2;
    Z_FiBwFlowControl - (N_FiSlotStopper - 1)*H_FiSlotStopper
], [0; 0; 0]*deg)
ArrayFiSlotStopper := ArrayLast(N_FiSlotStopper, 1, H_FiSlotStopper)
FiAirRemovalBaffle := BoxF([
    FiInletChannel_Origin[0] - T_Acrylic;
    FiInletChannel_Origin[1] - W_FiInletChannel - T_PlantWall - T_FiWeir - S_FiAirRemovalBaffle;
    Z_FiEntTank + H_FiAirRemovalGap
], [
    FiInletChannel_Origin[0] + L_FiEntBox + T_Acrylic;
    FiInletChannel_Origin[1] - W_FiInletChannel - T_PlantWall - T_FiWeir - S_FiAirRemovalBaffle - T_Acrylic;
    Z_FiEntTank + H_FiEntTank
], [0; 0; 0]*deg)
FiAirRemovalOnly := BoxSUBF([
    FiInletChannel_Origin[0] - T_Acrylic;
    FiInletChannel_Origin[1] - W_FiInletChannel - T_PlantWall - T_FiWeir - S_FiAirRemovalBaffle;
    Z_FiEntTank + H_FiAirRemovalGap
], [
    FiInletChannel_Origin[0] + L_FiEntBox + T_Acrylic;
    FiInletChannel_Origin[1] - W_FiInletChannel - T_PlantWall - T_FiWeir - S_FiAirRemovalBaffle - T_Acrylic;
    Z_FiEntTank + H_FiEntTank
], [0; 0; 0]*deg, ["FiAuxBoxCon"; "FiEntExitBoxCon"])
FiRemovableWeirScript :=
    stack(FiAirRemovalBaffleLayer, FiAirRemovalOnly, FiAirRemovalBaffleFrz) if N_Fi < 2
    stack(FiStopGateLayer, FiStopGate, FiStopGateFrz, FiSlotStopperLayer, FiSlotStopper, view("f"), ArrayFiSlotStopper, view("t"), FiSlotStopperFrz, FiAirRemovalBaffleLayer, FiAirRemovalBaffle, FiAirRemovalBaffleFrz) otherwise
ThawFilter := ThawMultiple(["Fi*"])
FrzFiLayers := FreezeMultiple(["FiInletChannelCon"; "FiInletCouplingPlu"; "FiAuxBoxCon"; "FiBypassPipePlu"; "FiBypassFittingPlu"; "FiDistPipePlu"; "FiDistFittingPlu"; "FiInletChannelDrainPipePlu"; "FiInletChannelDrainFittingPlu"; "FiInletChannelDrainRemovablePlu"; "FiBypassDrainPipePlu"; "FiBypassDrainFittingPlu"; "FiBypassDrainRemovablePlu"])
ThawFiArray2Layers := ThawMultiple(["FiAuxBoxCon"; "FiBypassPipePlu"; "FiBypassFittingPlu"; "FiDistPipePlu"; "FiDistFittingPlu"; "FiBypassDrainPipePlu"; "FiBypassDrainFittingPlu"; "FiBypassDrainRemovablePlu"])
S_Fi := L_FiEntBox + 2*T_PlantWall + L_FiDistBox
ArrayFilter1 := array_all(1, N_Fi, S_Fi)
ArrayFilter2 := array_all(1, max(1, N_Fi - 1), S_Fi)
FreezeFilter := FreezeMultiple(["Fi*"])
FiArray := stack(ThawFilter, FrzFiLayers, ArrayFilter1, FreezeFilter, ThawFiArray2Layers, ArrayFilter2, FreezeFilter)
ThawFilterCon := ThawMultiple(["Fi*Con"])
RenameFilterMasonry :=
    RenameLayer("FiAuxBoxCon", "FiCon") if N_Fi > 2
    RenameLayer("FiEntExitBoxCon", "FiCon") otherwise
GroupFilterMasonry := GroupAll("FiCon")
FreezeFi := FreezeMultiple(["Fi*"])
FiConUnion := stack(ThawFilterCon, Union_All, RenameFilterMasonry, GroupFilterMasonry, FreezeFi)
# Array filter
# Masonry cuts
FiEntWeirCutout1 :=
    Local ← ""
    for i ∈ 0 .. N_Fi - 1
        Local[i] ← BoxF([
            FiInletChannel_Origin[0] + S_Fi*i;
            FiInletChannel_Origin[1] - W_FiInletChannel - T_FiWeir;
            FiInletChannel_Origin[2]
        ], [
            FiInletChannel_Origin[0] + S_Fi*i + L_FiEntBox;
            FiInletChannel_Origin[1] - W_FiInletChannel - T_PlantWall;
            FiInletChannel_Origin[2] + H_FiEntTank
        ], [0; 0; 0]*deg)
    return Local
FiEntWeirCutout2 :=
    Local ← ""
    for i ∈ 0 .. N_Fi - 1
        Local[i] ← BoxF([FiInletChannel_Origin[0] + S_Fi*i; FiInletChannel_Origin[1] - W_FiInletChannel; Z_FiEntWeir], [
            FiInletChannel_Origin[0] + S_Fi*i + L_FiEntBox;
            FiInletChannel_Origin[1] - W_FiInletChannel - T_FiWeir;
            FiInletChannel_Origin[2] + H_FiEntTank
        ], [0; 0; 0]*deg)
    return Local
FiEntWeirCutout3 :=
    Local ← ""
    for i ∈ 0 .. N_Fi - 1
        Local[i] ← BoxF([
            FiInletChannel_Origin[0] + L_FiEntBox/2 - W_FiStopGate/2 + S_Fi*i;
            FiInletChannel_Origin[1] - W_FiInletChannel;
            Z_FiEntWeir - H_FiStopGate
        ], [
            FiInletChannel_Origin[0] + L_FiEntBox/2 + W_FiStopGate/2 + S_Fi*i;
            FiInletChannel_Origin[1] - W_FiInletChannel - T_FiWeir;
            Z_FiEntWeir
        ], [0; 0; 0]*deg)
    return Local
FiEntWeirStopGateCutout :=
    Local ← ""
    for i ∈ 0 .. N_Fi - 1
        Local[i] ← BoxF([
            FiInletChannel_Origin[0] + L_FiEntBox/2 - W_FiStopGate/2 - T_Acrylic + S_Fi*i;
            FiInletChannel_Origin[1] - W_FiInletChannel - T_FiWeir/2 + T_Acrylic/2;
            Z_FiEntWeir - H_FiStopGate
        ], [
            FiInletChannel_Origin[0] + L_FiEntBox/2 + W_FiStopGate/2 + T_Acrylic + S_Fi*i;
            FiInletChannel_Origin[1] - W_FiInletChannel - T_FiWeir/2 - T_Acrylic/2;
            FiInletChannel_Origin[2] + H_FiEntTank
        ], [0; 0; 0]*deg)
    return Local
FiEntSlotCutout :=
    Local ← ""
    for i ∈ 0 .. N_Fi - 1
        Local[i] ← BoxF([
            FiInletChannel_Origin[0] + L_FiEntBox/2 - W_FiBwFlowControl/2 + S_Fi*i;
            FiInletChannel_Origin[1] - W_FiInletChannel - T_PlantWall;
            Z_FiBwFlowControl - N_FiSlotStopper*H_FiSlotStopper
        ], [
            FiInletChannel_Origin[0] + L_FiEntBox/2 + W_FiBwFlowControl/2 + S_Fi*i;
            FiInletChannel_Origin[1] - W_FiInletChannel - T_PlantWall - T_FiWeir;
            FiInletChannel_Origin[2] + H_FiEntTank
        ], [0; 0; 0]*deg)
    return Local
FiEntStopperSlotCutout :=
    Local ← ""
    for i ∈ 0 .. N_Fi - 1
        Local[i] ← BoxF([
            FiInletChannel_Origin[0] + L_FiEntBox/2 - W_FiBwFlowControl/2 - T_Acrylic + S_Fi*i;
            FiInletChannel_Origin[1] - W_FiInletChannel - T_PlantWall - T_FiWeir/2 + T_Acrylic/2;
            Z_FiBwFlowControl - N_FiSlotStopper*H_FiSlotStopper
        ], [
            FiInletChannel_Origin[0] + L_FiEntBox/2 + W_FiBwFlowControl/2 + T_Acrylic + S_Fi*i;
            FiInletChannel_Origin[1] - W_FiInletChannel - T_PlantWall - T_FiWeir/2 - T_Acrylic/2;
            FiInletChannel_Origin[2] + H_FiEntTank
        ], [0; 0; 0]*deg)
    return Local
FiAirRemovalBaffleSlot :=
    Local ← ""
    for i ∈ 0 .. N_Fi - 1
        Local[i] ← BoxF([
            FiInletChannel_Origin[0] - T_Acrylic + S_Fi*i;
            FiInletChannel_Origin[1] - W_FiInletChannel - T_PlantWall - T_FiWeir - S_FiAirRemovalBaffle;
            Z_FiEntTank + H_FiAirRemovalGap
        ], [
            FiInletChannel_Origin[0] + L_FiEntBox + T_Acrylic + S_Fi*i;
            FiInletChannel_Origin[1] - W_FiInletChannel - T_PlantWall - T_FiWeir - S_FiAirRemovalBaffle - T_Acrylic;
            Z_FiEntTank + H_FiEntTank
        ], [0; 0; 0]*deg)
    return Local
FiBypassWeirCutout :=
    Local ← "" if N_Fi < 2
    otherwise
        for i ∈ 0 .. N_Fi - 2
            Local[i] ← BoxF([
                FiEntBox_Origin[0] + L_FiEntBox - zc + S_Fi*i;
                FiEntBox_Origin[1] - T_PlantWall;
                FiEntBox_Origin[2] + (Z_FiOverflowWeir - Z_FiEntTank)
            ], [
                FiEntBox_Origin[0] + L_FiEntBox + L_FiDistBox + (2*T_PlantWall + 2*zc)*(N_Fi ≠ 1) + S_Fi*i;
                FiEntBox_Origin[1] - W_FiEntBox;
                FiEntBox_Origin[2] + H_FiEntTank
            ], [0; 0; 0]*deg)
    return Local
FiDistWeirCutout :=
    Local ← "" if N_Fi < 2
    otherwise
        for i ∈ 0 .. N_Fi - 2
            Local[i] ← BoxF([
                FiDistBox_Origin[0] - T_PlantWall - zc + S_Fi*i;
                FiDistBox_Origin[1] - W_FiExitBox;
                FiDistBox_Origin[2] + H_FiEntTank + zc
            ], [
                FiDistBox_Origin[0] + L_FiDistBox + (T_PlantWall + zc)*(N_Fi ≠ 1) + S_Fi*i;
                FiDistBox_Origin[1];
                FiDistBox_Origin[2] + H_FiDistBarrier
            ], [0; 0; 0]*deg)
    return Local
Freezeall := stack("-layer", "f", "~0", "")
FiSubtractWeirs := SubtractF(["FiCon"], "DeleteMe")
FiGroupCon :=
    one ← FiConLayersThaw
    two ← GroupAll("FiCon")
    return stack(Freezeall, one, two, Freezeall)
FiEntranceWeirOnly1 := BoxF([
    FiInletChannel_Origin[0];
    FiInletChannel_Origin[1] - W_FiInletChannel;
    FiInletChannel_Origin[2] + H_FiEntTank
], [
    FiInletChannel_Origin[0] + L_FiEntBox;
    FiInletChannel_Origin[1] - W_FiInletChannel - T_PlantWall - T_FiWeir;
    FiInletChannel_Origin[2] + HW_FiInletChannel
], [0; 0; 0]*deg)
FiEntranceWeirOnly2 := BoxF([
    FiDistBox_Origin[0] - T_PlantWall;
    FiDistBox_Origin[1] - W_FiExitBox;
    FiDistBox_Origin[2] + H_FiEntTank + zc
], [FiDistBox_Origin[0]; FiDistBox_Origin[1]; FiDistBox_Origin[2] + H_FiDistBarrier], [0; 0; 0]*deg)
FiEntranceWeirOnly3 := BoxF([
    FiEntBox_Origin[0] + L_FiEntBox - zc;
    FiEntBox_Origin[1] - T_PlantWall;
    FiEntBox_Origin[2] + (Z_FiOverflowWeir - Z_FiEntTank)
], [
    FiEntBox_Origin[0] + L_FiEntBox + (2*T_PlantWall + 2*zc);
    FiEntBox_Origin[1] - W_FiEntBox;
    FiEntBox_Origin[2] + H_FiEntTank
], [0; 0; 0]*deg)
FiConCuts :=
    stack(FiGroupCon, FiDeleteWeirLayer, SelectFiDeleteWeir, FiEntranceWeirOnly1, FiEntranceWeirOnly2, FiEntranceWeirOnly3, GroupDelete, FiSubtractWeirs, Freezeall) if N_Fi < 2
    stack(FiEntWeirCutout1, FiEntWeirCutout2, FiEntWeirCutout3, FiEntWeirStopGateCutout, FiEntSlotCutout, FiEntStopperSlotCutout, FiAirRemovalBaffleSlot, FiBypassWeirCutout, FiDistWeirCutout, GroupDelete, FiSubtractWeirs) otherwise
AC_Filter := stack(FiConScript, FiBody, FiPluPipes, FiPluFittings, FiPluValves, FiModulePlumbing, FiBw, FiBypassPlu, FiDistPlu, FiSandDrain, FiDrainPlumbingScript, FiRemovableWeirScript, FiArray, FiConUnion, FiConCuts)
AC_FilterLow := AC_Filter
