# [reference: BasicInputs.xmcd]
# [reference: ExpertInputs.xmcd]
# [reference: MathFunctions.xmcd]
# [reference: PipeDatabase.xmcd]
# [reference: FluidsFunctions.xmcd]
# [reference: SedimentationTank.xmcd]
# [reference: Flocculator.xmcd]
# [reference: LFOM.xmcd]
# [reference: LinearCdc.xmcd]
# [reference: ChemStorageTanks.xmcd]
# [reference: EntranceTank.xmcd]
# [reference: StackedRapidSandFilterabh35.xmcd]
# [reference: DrainChannel.xmcd]
# [reference: MaterialsList.xmcd]
# AutoCAD drawing programs:
# Translators:
# These are the codes that take MathCAD outputs and create AutoCAD scripts that are used to draw the plant (formerly Basics)
# [reference: MtoATranslators.xmcd]
# The wrapped MtoA translator contains the functions that the user will want to access. These functions will draw pieces with full functionality - specifying the location, dimension, and orientation of the object. Also, it contains layer control and subtraction capabilities for grouped objects.
# [reference: MtoATranslatorsWrapped.xmcd]
# Plant Elements:
# These are all of the files that draw the fundamental parts of the plants (tees, elbows, tanks, pipes, etc)
# [reference: ChannelF.xmcd]
# [reference: PlumbingF.xmcd]
# [reference: TankF.xmcd]
# [reference: StairsF.xmcd]
# [reference: DrainChannelF.xmcd]
# Specific Pieces:
# These are the codes that draw the bigger pieces of the plant (the sed tank, floc tank, etc)
# [reference: FlocculatorAC.xmcd]
# [reference: SedimentationTankAC.xmcd]
# [reference: EntranceTankAC.xmcd]
# [reference: ChemStockTanksAC.xmcd]
# [reference: DrainChannelAC.xmcd]
# Stacked Rapid Sand Filter
# Concrete Box Origin Points
Fi_origin := [
    Plant_Origin[0] - W_FiInletChannel - 5*T_PlantWall - T_FiWall - L_FiEntrance - L_FiExit - W_MpWalkway - L_Sed - W_PlantDC;
    Et_Origin[1] + W_Et + T_PlantWall - W_EtChemPlatform - W_EtWalkway - W_Fi - T_FiWall;
    Z_FiBottom
] = [-10.9363; 6.21448; -2.56828] m
FiEntranceBox_origin := [
    Plant_Origin[0] - W_FiInletChannel - 3*T_PlantWall - L_Sed - W_PlantDC;
    Fi_origin[1] + W_Fi/2 - W_FiEntrance + S_Fitting + ConRadius(ND_FiBwTrunk);
    Z_FiEntranceBottom
]
FiExitBox_origin := FiEntranceBox_origin + [-L_FiEntrance - T_PlantWall; 0; 0]
FiInletChannel_Origin := [
    Plant_Origin[0] - L_Sed - 2*T_PlantWall - W_PlantDC;
    FiEntranceBox_origin[1] - L_FiInletChannel + W_FiEntrance;
    Z_FiInletChannelBottom
]
FiOverflowBox_Origin := FiEntranceBox_origin + [0; -T_PlantWall - W_FiOverflow; 0]
FiDistBox_Origin := [-L_FiOverflow - T_PlantWall; 0; 0] + FiOverflowBox_Origin
# Coupling Origin Points
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# This will be the pipe layout in the entrance and exit boxes to allow for 2 90 degree elbows in  Pipes 2 and 3 coming from the entrance box (on the right)
FiInletCoupling1_origin := [
    FiEntranceBox_origin[0] - L_FiEntrance + T_ConcreteMin + ConRadius(ND_FiTrunk);
    FiEntranceBox_origin[1] + W_FiEntrance - ConRadius(ND_FiBwTrunk) - S_Fitting;
    FiEntranceBox_origin[2] - CouplingLength(ND_FiTrunk) + SocketDepth(ND_FiTrunk)
]
FiBwInletCoupling_origin := [
    FiInletCoupling1_origin[0] + L_FiOverflowWeir - S_Fitting - 2*ConRadius(ND_FiBwTrunk);
    FiInletCoupling1_origin[1];
    FiEntranceBox_origin[2] - CouplingLength(ND_FiBwTrunk) + SocketDepth(ND_FiBwTrunk)
]
FiInletCoupling2_origin := [
    FiEntranceBox_origin[0] - L_FiEntrance + L_FiOverflowWeir - (ConRadius(ND_FiTrunk) + S_Fitting);
    FiEntranceBox_origin[1] + 2*T_ConcreteMin + 3*ConRadius(ND_FiTrunk);
    FiInletCoupling1_origin[2]
]
FiInletCoupling3_origin := [
    FiEntranceBox_origin[0] - L_FiEntrance + T_ConcreteMin + ConRadius(ND_FiTrunk);
    FiEntranceBox_origin[1] + 2*T_ConcreteMin + 3*ConRadius(ND_FiTrunk);
    FiEntranceBox_origin[2] - CouplingLength(ND_FiTrunk) + SocketDepth(ND_FiTrunk)
]
FiExitCoupling0_origin := [
    FiExitBox_origin[0] - T_ConcreteMin - ConRadius(ND_FiTrunk);
    FiInletCoupling1_origin[1];
    FiExitBox_origin[2] - CouplingLength(ND_FiTrunk) + SocketDepth(ND_FiTrunk)
]
FiExitCoupling1_origin := [
    (FiExitBox_origin[0] - L_FiExit + T_ConcreteMin) + ConRadius(ND_FiTrunk);
    FiInletCoupling1_origin[1];
    FiExitBox_origin[2] - CouplingLength(ND_FiTrunk) + SocketDepth(ND_FiTrunk)
]
FiExitCoupling2_origin := [
    (FiExitBox_origin[0] - L_FiExit + T_ConcreteMin) + ConRadius(ND_FiExitWaste);
    FiExitBox_origin[1] + T_ConcreteMin + ConRadius(ND_FiTrunk);
    FiExitBox_origin[2] - CouplingLength(ND_FiTrunk) + SocketDepth(ND_FiTrunk)
]
FiExitCoupling3_origin := [
    FiExitBox_origin[0] - T_ConcreteMin - ConRadius(ND_FiTrunk);
    FiExitBox_origin[1] + T_ConcreteMin + ConRadius(ND_FiTrunk);
    FiExitBox_origin[2] - CouplingLength(ND_FiExitWaste) + SocketDepth(ND_FiExitWaste)
]
FiFerncoBwCoupling_origin := [Fi_origin[0]; FiBwInletCoupling_origin[1]; Fi_origin[2] + outerradius(ND_FiBwManBranch)]
FiFerncoCouplings_origin := [Fi_origin[0]; FiFerncoBwCoupling_origin[1]; FiFerncoBwCoupling_origin[2] + H_FiBottomLayer]
FiWallBwCoupling_origin := [
    Fi_origin[0] + T_FiWall + CouplingLength(ND_FiBwTrunk) - SocketDepth(ND_FiBwTrunk);
    FiBwInletCoupling_origin[1];
    Fi_origin[2] + outerradius(ND_FiBwManBranch)
]
FiWallCouplings_origin := [
    Fi_origin[0] + T_FiWall + CouplingLength(ND_FiTrunk) - SocketDepth(ND_FiTrunk);
    FiBwInletCoupling_origin[1];
    Fi_origin[2] + outerradius(ND_FiBwManBranch) + H_FiBottomLayer
]
# Concrete Box Dimensions
FiEntranceBox_dim := [L_FiEntrance; W_FiEntrance; H_FiEntrance]
FiExitBox_dim := [L_FiExit; W_FiEntrance; H_FiEntrance]
Fi_dim := [L_Fi; W_Fi; H_Fi] = [1.04873; 1.5629; 4.31045] m
FiEntranceWeir_dim := [-T_PlantWall; W_FiEntrance; ZW_FiInletChannel + zc - Z_FiEntranceWeir + H_PlantFreeboard]
FiOverflowBox_Dim := [L_FiOverflow; W_FiOverflow; H_FiOverflow]
FiDistBox_Dim := [L_FiExit; W_FiOverflow; H_FiEntrance]
# Inlet Channel
LayerFiInletChannel := layer_new("FiInletChannelCon", grey)
FiInletChannel := Tank(FiInletChannel_Origin, [W_FiInletChannel; L_FiInletChannel; H_FiInletChannel], T_ChannelWall)
FreezeFiInletChannel := FreezeLayer("FiInletChannelCon")
FiInletChannelScript := stack(LayerFiInletChannel, FiInletChannel, FreezeFiInletChannel)
# Filter Box Concrete
LayerFiTank := layer_new("FiTankCon", grey)
FiTank := Tank(Fi_origin, Fi_dim, T_FiWall)
FiSiphonManLedgeL := BoxF([
    Fi_origin[0];
    Fi_origin[1] + T_ConcreteMin + ConRadius(ND_FiSiphon) - 2*S_Fitting;
    Z_FiSiphonInlet - ConRadius(ND_FiSiphon)
], [
    Fi_origin[0] - T_ConcreteMin;
    Fi_origin[1] + T_ConcreteMin + ConRadius(ND_FiSiphon) + 2*S_Fitting;
    Z_FiSiphonInlet - ConRadius(ND_FiSiphon) - T_ConcreteMin
], [0; 0; 0]*deg)
FiSiphonManLedgeR := BoxF([
    Fi_origin[0] - L_Fi;
    Fi_origin[1] + T_ConcreteMin + ConRadius(ND_FiSiphon) - 2*S_Fitting;
    Z_FiSiphonInlet - ConRadius(ND_FiSiphon)
], [
    Fi_origin[0] - L_Fi + T_ConcreteMin;
    Fi_origin[1] + T_ConcreteMin + ConRadius(ND_FiSiphon) + 2*S_Fitting;
    Z_FiSiphonInlet - ConRadius(ND_FiSiphon) - T_ConcreteMin
], [0; 0; 0]*deg)
LayerFiTankFreeze := FreezeLayer("FiTankCon")
FiTankScript := stack(LayerFiTank, FiTank, FiSiphonManLedgeL, FiSiphonManLedgeR, Union_All, LayerFiTankFreeze)
# Filter Box Manifold Connections: Fernco Couplings, Outer Wall Couplings, and Through-wall Pipes
# Fernco Couplings
LayerFiFernco := layer_new("FiFerncoCouplingsPlu", purple)
FiFerncoBwCoupling := FerncoCouplingF(FiFerncoBwCoupling_origin, [0; 0; 0]*deg, ND_FiBwTrunk, L_FiManFerncoCoupling)
FiFerncoCoupling := FerncoCouplingF(FiFerncoCouplings_origin, [0; 0; 0]*deg, ND_FiTrunk, L_FiManFerncoCoupling)
ArrayFiManifoldLast := ArrayLast(N_FiLayer, 1, H_FiLayer)
LayerFiFerncoFreeze := FreezeLayer("FiFerncoCouplingsPlu")
FiFerncoScript := stack(LayerFiFernco, FiFerncoBwCoupling, FiFerncoCoupling, view("f"), ArrayFiManifoldLast, view("t"), LayerFiFerncoFreeze)
# Filter Wall Couplings
LayerFiFittingPlu := layer_new("FiFittingsPlu", green)
FiWallBwCoupling := CouplingF(FiWallBwCoupling_origin, [0; 0]*deg, ND_FiBwTrunk, PS_Default)
FiWallCoupling := CouplingF(FiWallCouplings_origin, [0; 0]*deg, ND_FiTrunk, PS_Default)
LayerFiFittingFrz := FreezeLayer("FiInletOutletFittingsPlu")
FiWallCouplingScript := stack(LayerFiFittingPlu, FiWallBwCoupling, FiWallCoupling, view("f"), ArrayFiManifoldLast, view("t"), LayerFiFittingFrz)
# Through-wall Pipes
LayerFiPipePlu := layer_new("FiPipePlu", blue)
FiBwConPipe := PipeSUBF(FiWallBwCoupling_origin - [CouplingLength(ND_FiBwTrunk) - 2*SocketDepth(ND_FiBwTrunk); 0 m; 0 m], L_FiManFerncoCoupling/2 + T_FiWall + SocketDepth(ND_FiBwTrunk), [0; 0; 0]*deg, ND_FiBwTrunk, PS_Default, ["FiTankCon"])
FiConPipe1 := PipeSUBF(FiWallCouplings_origin + [CouplingLength(ND_FiTrunk) - 2*SocketDepth(ND_FiTrunk); 0 m; 0 m], L_FiManFerncoCoupling/2 + T_FiWall + SocketDepth(ND_FiTrunk), [0; 0; 0]*deg, ND_FiTrunk, PS_Default, ["FiTankCon"])
FiConPipe2 := PipeSUBF(FiWallCouplings_origin + [CouplingLength(ND_FiTrunk) - 2*SocketDepth(ND_FiTrunk); 0 m; H_FiLayer], L_FiManFerncoCoupling/2 + T_FiWall + SocketDepth(ND_FiTrunk), [0; 0; 0]*deg, ND_FiTrunk, PS_Default, ["FiTankCon"])
FiConPipe3 := PipeSUBF(FiWallCouplings_origin + [CouplingLength(ND_FiTrunk) - 2*SocketDepth(ND_FiTrunk); 0 m; 2*H_FiLayer], L_FiManFerncoCoupling/2 + T_FiWall + SocketDepth(ND_FiTrunk), [0; 0; 0]*deg, ND_FiTrunk, PS_Default, ["FiTankCon"])
FiConPipe4 := PipeSUBF(FiWallCouplings_origin + [CouplingLength(ND_FiTrunk) - 2*SocketDepth(ND_FiTrunk); 0 m; 3*H_FiLayer], L_FiManFerncoCoupling/2 + T_FiWall + SocketDepth(ND_FiTrunk), [0; 0; 0]*deg, ND_FiTrunk, PS_Default, ["FiTankCon"])
FiConPipe5 := PipeSUBF(FiWallCouplings_origin + [CouplingLength(ND_FiTrunk) - 2*SocketDepth(ND_FiTrunk); 0 m; 4*H_FiLayer], L_FiManFerncoCoupling/2 + T_FiWall + SocketDepth(ND_FiTrunk), [0; 0; 0]*deg, ND_FiTrunk, PS_Default, ["FiTankCon"])
FiConPipe6 := PipeSUBF(FiWallCouplings_origin + [CouplingLength(ND_FiTrunk) - 2*SocketDepth(ND_FiTrunk); 0 m; 5*H_FiLayer], L_FiManFerncoCoupling/2 + T_FiWall + SocketDepth(ND_FiTrunk), [0; 0; 0]*deg, ND_FiTrunk, PS_Default, ["FiTankCon"])
LayerFiPipeFrz := FreezeLayer("FiInletOutletPipePlu")
FiWallPipeScript := stack(LayerFiPipePlu, FiBwConPipe, FiConPipe1, FiConPipe2, FiConPipe3, FiConPipe4, FiConPipe5, FiConPipe6, LayerFiPipeFrz)
FiManWallScript := stack(FiFerncoScript, FiWallCouplingScript, FiWallPipeScript)
# Manifold Trunks and Branch Receivers
# Branch Receivers
LayerFiManPipe := layer_new("FiManPipePlu", blue)
FiBranchHolder := PipeF([
    Fi_origin[0] - CapThickness(ND_FiBranchHolder) - S_FiManAssembly;
    Fi_origin[1] + ConRadius(ND_FiBwBranchHolder);
    Fi_origin[2] + H_FiBottomLayer + outerradius(ND_FiBwManBranch)
], L_Fi - 2*CapThickness(ND_FiBranchHolder) - 2*S_FiManAssembly, [0; 0]*deg, ND_FiBranchHolder, PS_Default)
LayerFiManCaps := layer_new("FiManCapPlu", green)
FiBranchHolderCapRight := CapF([
    Fi_origin[0] - CapThickness(ND_FiBranchHolder) - S_FiManAssembly;
    Fi_origin[1] + ConRadius(ND_FiBwBranchHolder);
    Fi_origin[2] + H_FiBottomLayer + outerradius(ND_FiBwManBranch)
], [0; 0]*deg, ND_FiBranchHolder)
FiBranchHolderCapLeft := CapF([
    Fi_origin[0] - L_Fi + S_FiManAssembly + CapThickness(ND_FiBranchHolder);
    Fi_origin[1] + ConRadius(ND_FiBwBranchHolder);
    Fi_origin[2] + H_FiBottomLayer + outerradius(ND_FiBwManBranch)
], [180; 0]*deg, ND_FiBranchHolder)
ArrayFiBranchHolder := Array_All(2, 1, W_Fi - 2*ConRadius(ND_FiBwBranchHolder) - 2*S_FiManAssembly)
FiManPipeFrz := FreezeLayer("FiManPipePlu")
FiManCapFrz := FreezeLayer("FiManCapPlu")
FiBranchHolderScript := stack(LayerFiManPipe, FiBranchHolder, LayerFiManCaps, FiBranchHolderCapRight, FiBranchHolderCapLeft, ArrayFiBranchHolder, FiManPipeFrz, FiManCapFrz)
# Manifold Trunks
SelectFiManPipes := SelectLayer("FiManPipePlu")
FiTrunk := PipeF([
    Fi_origin[0] - L_FiManFerncoCoupling/2;
    FiBwInletCoupling_origin[1];
    Fi_origin[2] + H_FiBottomLayer + outerradius(ND_FiBwManBranch)
], L_FiTrunk, [0; 0]*deg, ND_FiTrunk, PS_Default)
SelectFiManCaps := SelectLayer("FiManCapPlu")
FiTrunkCap := CapF([
    Fi_origin[0] - L_FiManFerncoCoupling/2 - L_FiTrunk;
    FiBwInletCoupling_origin[1];
    Fi_origin[2] + H_FiBottomLayer + outerradius(ND_FiBwManBranch)
], [180; 0]*deg, ND_FiTrunk)
FiTrunkScript := stack(SelectFiManPipes, FiTrunk, FiManPipeFrz, SelectFiManCaps, FiTrunkCap, FiManCapFrz)
# Trunk and Branch Receiver Holes and Array
FiTrunkOrifice := CylinderF([
    Fi_origin[0] - L_FiManFerncoCoupling - B_FiManifoldBranch/2;
    Fi_origin[1] + S_FiManAssembly + ConRadius(ND_FiBwBranchHolder);
    Fi_origin[2] + H_FiBottomLayer + outerradius(ND_FiBwManBranch)
], outerradius(ND_FiManBranch), W_Fi - 2*ConRadius(ND_FiBwBranchHolder) - 2*S_FiManAssembly, [-90; 0]*deg)
ArrayFiTrunkOrifice := ArrayLast(1, N_FiManBranch/2, -B_FiManifoldBranch)
# GroupAll
SubtractFiManPipeOrifices := SubtractF(["FiManPipePlu"], "DeleteMe")
SubtractFiManCapOrifices := SubtractF(["FiManCapPlu"], "DeleteMe")
ArrayFiTrunks := array_all(N_FiLayer, 1, H_FiLayer)
# FreezeFiTrunkLayer
FiManTrunkOrificeScript := stack(FiTrunkOrifice, ArrayFiTrunkOrifice, GroupDelete, SubtractFiManPipeOrifices, FiTrunkOrifice, ArrayFiTrunkOrifice, GroupDelete, SubtractFiManCapOrifices, SelectFiManPipes, SelectFiManCaps, ArrayFiTrunks, FiManPipeFrz, FiManCapFrz)
# Backwash Trunk
FiBwTrunk := PipeF([
    Fi_origin[0] - L_FiManFerncoCoupling/2;
    FiBwInletCoupling_origin[1];
    Fi_origin[2] + outerradius(ND_FiBwManBranch)
], L_FiBwTrunk, [0; 0]*deg, ND_FiBwTrunk, PS_Default)
FiBwTrunkCap := CapF([
    Fi_origin[0] - L_FiManFerncoCoupling/2 - L_FiBwTrunk;
    FiBwInletCoupling_origin[1];
    Fi_origin[2] + outerradius(ND_FiBwManBranch)
], [180; 0; 0]*deg, ND_FiBwTrunk)
FiBwManTrunkScript := stack(SelectFiManPipes, FiBwTrunk, FiManPipeFrz, SelectFiManCaps, FiBwTrunkCap, FiManCapFrz)
# Backwash Branch Receivers
FiBwBranchReceiver := PipeF([
    Fi_origin[0] - CapThickness(ND_FiBwBranchHolder) - S_FiManAssembly;
    Fi_origin[1] + ConRadius(ND_FiBwBranchHolder);
    Fi_origin[2] + outerradius(ND_FiBwManBranch)
], L_Fi - 2*CapThickness(ND_FiBranchHolder) - 2*S_FiManAssembly, [0; 0]*deg, ND_FiBwBranchHolder, PS_Default)
FiBwBranchReceiverCapR := CapF([
    Fi_origin[0] - CapThickness(ND_FiBwBranchHolder) - S_FiManAssembly;
    Fi_origin[1] + ConRadius(ND_FiBwBranchHolder);
    Fi_origin[2] + outerradius(ND_FiBwManBranch)
], [0; 0; 0]*deg, ND_FiBwBranchHolder)
FiBwBranchReceiverCapL := CapF([
    Fi_origin[0] - L_Fi + S_FiManAssembly + CapThickness(ND_FiBwBranchHolder);
    Fi_origin[1] + ConRadius(ND_FiBwBranchHolder);
    Fi_origin[2] + outerradius(ND_FiBwManBranch)
], [180; 0; 0]*deg, ND_FiBwBranchHolder)
ArrayFiBwBranchHolder := ArrayLast(2, 1, W_Fi - 2*ConRadius(ND_FiBwBranchHolder) - 2*S_FiManAssembly)
FiBwBranchReceiverScript := stack(SelectFiManPipes, FiBwBranchReceiver, ArrayFiBwBranchHolder, FiManPipeFrz, SelectFiManCaps, FiBwBranchReceiverCapR, ArrayFiBwBranchHolder, FiBwBranchReceiverCapL, ArrayFiBwBranchHolder, FiManCapFrz)
# Backwash Trunk and Branch Receiver Orifices
FiBwTrunkOrifice := CylinderF([
    Fi_origin[0] - L_FiManFerncoCoupling - B_FiManifoldBranch/2;
    Fi_origin[1] + ConRadius(ND_FiBwBranchHolder) + S_FiManAssembly;
    Fi_origin[2] + outerradius(ND_FiBwManBranch)
], outerradius(ND_FiBwManBranch), W_Fi - 2*ConRadius(ND_FiBwBranchHolder) - 2*S_FiManAssembly, [-90; 0]*deg)
FiBwTrunkOrificeScript := stack(FiBwTrunkOrifice, ArrayFiTrunkOrifice, GroupDelete, SubtractFiManPipeOrifices, FiBwTrunkOrifice, ArrayFiTrunkOrifice, GroupDelete, SubtractFiManCapOrifices)
# Filter Box Floor Cutouts
FiBwTrunkCutout := BoxF([
    Fi_origin[0];
    Fi_origin[1] + W_Fi/2 - ConRadius(ND_FiBwTrunk);
    Fi_origin[2] - max(ConRadius(ND_FiBwTrunk), FerncoOuterDiameter(ND_FiBwTrunk)/2) + outerradius(ND_FiBwManBranch)
], [Fi_origin[0] - L_Fi; Fi_origin[1] + W_Fi/2 + ConRadius(ND_FiBwTrunk); Fi_origin[2]], [0; 0; 0]*deg)
FiBwBranchHolderCutout1 := BoxF([
    Fi_origin[0];
    Fi_origin[1];
    Fi_origin[2] - ConRadius(ND_FiBwBranchHolder) + outerradius(ND_FiBwManBranch)
], [Fi_origin[0] - L_Fi; Fi_origin[1] + 2*ConRadius(ND_FiBwBranchHolder); Fi_origin[2]], [0; 0; 0]*deg)
FiBwBranchHolderCutout2 := BoxF([
    Fi_origin[0];
    Fi_origin[1] + W_Fi;
    Fi_origin[2] - ConRadius(ND_FiBwBranchHolder) + outerradius(ND_FiBwManBranch)
], [Fi_origin[0] - L_Fi; Fi_origin[1] + W_Fi - 2*ConRadius(ND_FiBwBranchHolder); Fi_origin[2]], [0; 0; 0]*deg)
SubtractBwTrunkCutouts := SubtractF(["FiTankCon"], "DeleteMe")
FiBoxFloorCutoutScript := stack(FiBwTrunkCutout, FiBwBranchHolderCutout1, FiBwBranchHolderCutout2, GroupDelete, SubtractBwTrunkCutouts)
FiTrunkReceiverScript := stack(FiTrunkScript, FiBranchHolderScript, FiManTrunkOrificeScript, FiBwManTrunkScript, FiBwBranchReceiverScript, FiBwTrunkOrificeScript, FiBoxFloorCutoutScript)
# Manifold Branches
LayerMan := layer_new("FiManBranchPlu", red)
FiManBranch := PipeF(Fi_origin + [
    -L_FiManFerncoCoupling - B_FiManifoldBranch/2;
    S_FiManAssembly + ConRadius(ND_FiBwBranchHolder) + outerradius(ND_FiBranchHolder) - L_FiManBranchExt;
    outerradius(ND_FiBwManBranch) + H_FiBottomLayer
], L_FiManBranch, [-90; 0]*deg, ND_FiManBranch, PS_FiBranch)
ArrayManBranches := array_all(1, N_FiManBranch/2, -B_FiManifoldBranch)
ArrayFiMan := array_all(N_FiLayer, 1, H_FiLayer)
FiBranchScript := stack(LayerMan, FiManBranch, ArrayManBranches, view("f"), ArrayFiMan, view("t"))
BwManBranch := PipeF(Fi_origin + [
    -L_FiManFerncoCoupling - B_FiManifoldBranch/2;
    S_FiManAssembly + ConRadius(ND_FiBwBranchHolder) + outerradius(ND_FiBwBranchHolder) - L_FiManBranchExt;
    outerradius(ND_FiBwManBranch)
], L_FiBwManBranch, [-90; 0]*deg, ND_FiBwManBranch, PS_FiBranch)
ArrayBwManBranches := ArrayLast(1, N_FiManBranch/2, -B_FiManifoldBranch)
MirrorFiManBranches := Mirror3dAll("zx", [Fi_origin[0]; Fi_origin[1] + W_Fi/2], "n")
FreezeFiManLayer := FreezeLayer("FiManBranchPlu")
FiBwBranchScript := stack(BwManBranch, ArrayBwManBranches, MirrorFiManBranches, FreezeFiManLayer)
FiManBranchScript := stack(FiBranchScript, FiBwBranchScript)
FiManifoldScript := stack(FiManWallScript, FiTrunkReceiverScript, FiManBranchScript)
# Auxiliary Box Concrete
# Entrance and Exit Boxes
LayerFiEntExitBox := layer_new("FiEntExitBoxCon", grey)
FiEntBox := Tank(FiEntranceBox_origin, FiEntranceBox_dim, T_PlantWall)
FiExitBox := Tank(FiExitBox_origin, FiExitBox_dim, T_PlantWall)
LayerFiEntExitBoxFrz := FreezeLayer("FiEntExitBoxCon")
# Overflow and Distribution Boxes
LayerFiOverflowDistBox := layer_new("FiOverflowDistBoxCon", grey)
FiDistBox := Tank(FiDistBox_Origin, FiDistBox_Dim, T_PlantWall)
FiOverflowBox := Tank(FiOverflowBox_Origin, FiOverflowBox_Dim, T_PlantWall)
LayerFiOverflowDistBoxFrz := FreezeLayer("FiOverflowDistBoxCon")
# Entrance Box Air Removal
FiAirRemovalBlockSlot := BoxF([
    FiEntranceBox_origin[0] - L_FiEntrance + L_FiOverflowWeir;
    FiEntranceBox_origin[1] - T_ConcreteMin;
    Z_FiAirRemovalBlockBottom
], [
    FiEntranceBox_origin[0] - L_FiEntrance + L_FiOverflowWeir;
    FiEntranceBox_origin[1] + T_ConcreteMin;
    Z_FiEntranceBottom + H_FiEntrance
] + [W_FiAirRemovalBlock; W_FiEntrance; 0], [0; 0; 0])
FiBaffle := BoxF([FiEntranceBox_origin[0]; FiEntranceBox_origin[1] - T_ConcreteMin; Z_FiEntranceBottom] + [-S_FiEntranceBaffle; 0; S_FiEntranceBaffle], [FiEntranceBox_origin[0]; FiEntranceBox_origin[1]; Z_FiEntranceBottom] + [-S_FiEntranceBaffle - T_SedWeir; W_FiEntrance + T_ConcreteMin; H_FiEntrance], [0; 0; 0])
FiSubtractBaffleSlots := SubtractF(["FiEntExitBoxCon"], "DeleteMe")
FiBaffleLayer := layer_new("FiBaffles", ltgrey)
FiAirRemovalBlock := BoxF([
    FiEntranceBox_origin[0] - S_FiEntranceBaffle - T_SedWeir - S_FiBaffleToBlock;
    FiEntranceBox_origin[1] - T_ConcreteMin;
    Z_FiAirRemovalBlockBottom
], [
    FiEntranceBox_origin[0] - S_FiEntranceBaffle - 2*T_SedWeir - S_FiBaffleToBlock;
    FiEntranceBox_origin[1] + T_ConcreteMin + W_FiEntrance;
    Z_FiAirRemovalBlockTop
], [0; 0; 0])
FiBaffleLayerFrz := FreezeLayer("FiBaffles")
FiBaffles := stack(FiBaffleLayer, FiBaffle, FiAirRemovalBlock, FiBaffleLayerFrz)
FiAuxBoxScript := stack(LayerFiEntExitBox, FiEntBox, FiExitBox, LayerFiEntExitBoxFrz, LayerFiOverflowDistBox, FiDistBox, FiOverflowBox, LayerFiOverflowDistBoxFrz, FiAirRemovalBlockSlot, FiBaffle, GroupDelete, FiSubtractBaffleSlots, FiBaffles)
# Auxiliary Box Plumbing (not filter entrance or exit)
Z_FiOverflowVertDrainPipeStart := Z_FiOverflowBottom - CouplingLength(ND_FiEntOverflow) + SocketDepth(ND_FiEntOverflow) = 1.40152 m
Z_FiOverflowVertDrainPipeEnd := Z_FiOverflowBottom - H_FiEntOverflowDrop + ElbowRadius(ND_FiEntOverflow) = 0.224351 m
X_FiOverflowHorizDrainPipeStart := FiInletChannel_Origin[0] + T_PlantWall - CouplingLength(ND_FiEntOverflow) + SocketDepth(ND_FiEntOverflow)
X_FiOverflowHorizDrainPipeEnd := FiEntranceBox_origin[0] - L_FiEntrance/2 + ElbowRadius(ND_FiEntOverflow)
# Auxiliary Fittings
FiAuxFittingLayer := layer_new("FiAuxFittingPlu", green)
FiBypassCoupling := CouplingSUBF([
    FiExitBox_origin[0] + T_PlantWall - SocketDepth(ND_DistPipe);
    FiEntranceBox_origin[1] - T_PlantWall - W_FiOverflow/2;
    Z_FiTop - S_Fitting - ConRadius(ND_DistPipe)
], [0; 0]*deg, ND_FiBypass, PS_Default, ["FiOverflowDistBoxCon"])
FiBypassElbow := ElbowF([
    FiExitBox_origin[0] + T_PlantWall - max(T_PlantWall, CouplingLength(ND_FiBypass)) - SocketDepth(ND_FiBypass);
    FiEntranceBox_origin[1] - T_PlantWall - W_FiOverflow/2;
    Z_FiTop - S_Fitting - ConRadius(ND_FiBypass)
], [90; 0; 90]*deg, ND_FiBypass, PS_Default)
FiOverflowBoxCoupling := CouplingSUBF([
    FiEntranceBox_origin[0] - L_FiEntrance/2;
    FiEntranceBox_origin[1] - T_PlantWall - W_FiOverflow/2;
    Z_FiOverflowVertDrainPipeStart
], [0; 90]*deg, ND_FiEntOverflow, PS_Default, ["FiOverflowDistBoxCon"])
FiOverflowDrainCouplingHoriz := CouplingSUBF([
    FiInletChannel_Origin[0] + T_PlantWall - SocketDepth(ND_FiEntOverflow);
    FiEntranceBox_origin[1] - T_PlantWall - W_FiOverflow/2;
    Z_FiOverflowVertDrainPipeEnd - ElbowRadius(ND_FiEntOverflow)
], [0; 0], ND_FiEntOverflow, PS_Default, ["DrainChannelCon"])
FiOverflowDrainElbow := ElbowF([
    FiEntranceBox_origin[0] - L_FiEntrance/2;
    FiEntranceBox_origin[1] - T_PlantWall - W_FiOverflow/2;
    Z_FiOverflowVertDrainPipeEnd
], [180; 0; 90]*deg, ND_FiEntOverflow, PS_Default)
FiAuxFittingFrz := FreezeLayer("FiAuxFittingPlu")
FiAuxFittingScript := stack(FiAuxFittingLayer, FiBypassCoupling, FiBypassElbow, FiOverflowBoxCoupling, FiOverflowDrainCouplingHoriz, FiOverflowDrainElbow, FiAuxFittingFrz)
# Distribution Plumbing Start
FiDistFittingLayer := layer_new("FiDistFittingPlu", green)
FiDistCoupling := CouplingSUBF([
    FiExitBox_origin[0] - L_FiExit/2;
    FiEntranceBox_origin[1] - T_PlantWall - W_FiOverflow/2;
    Z_FiExitBottom - SocketDepth(ND_DistPipe)
], [0; 90]*deg, ND_DistPipe, PS_Default, ["FiOverflowDistBoxCon"])
FiDistElbow1 := ElbowF([
    FiExitBox_origin[0] - L_FiExit/2;
    FiEntranceBox_origin[1] - T_PlantWall - W_FiOverflow/2;
    Z_FiDistPipe + ElbowRadius(ND_DistPipe)
], [0; 0; 270]*deg, ND_DistPipe, PS_Default)
FiDistFittingFrz := FreezeLayer("FiDistFittingPlu")
FiDistPipeLayer := layer_new("FiDistPipePlu", blue)
FiDistPipe1 := PipeSUBF([
    FiExitBox_origin[0] - L_FiExit/2;
    FiEntranceBox_origin[1] - T_PlantWall - W_FiOverflow/2;
    Z_FiExitBottom - CouplingLength(ND_DistPipe) + SocketDepth(ND_DistPipe)
], Z_FiExitBottom - CouplingLength(ND_DistPipe) + SocketDepth(ND_DistPipe) - (Z_FiDistPipe + ElbowRadius(ND_DistPipe)), [0; 270; 0]*deg, ND_DistPipe, PS_Default, ["FiOverflowDistBoxCon"])
FiDistPipe2 := PipeF([
    FiExitBox_origin[0] - L_FiExit/2;
    FiEntranceBox_origin[1] - T_PlantWall - W_FiOverflow/2;
    Z_FiDistPipe
], L_FiExit/2 - ElbowRadius(ND_DistPipe) + T_PlantWall, [0; 0; 0]*deg, ND_DistPipe, PS_Default)
FiDistPipeFrz := FreezeLayer("FiDistPipePlu")
FiDistStartScript := stack(FiDistFittingLayer, FiDistCoupling, FiDistElbow1, FiDistFittingFrz, FiDistPipeLayer, FiDistPipe1, FiDistPipe2, FiDistPipeFrz)
# Auxiliary Pipes
FiAuxPipeLayer := layer_new("FiAuxPipePlu", blue)
FiBypassPipeHoriz := PipeSUBF([
    FiExitBox_origin[0] + T_PlantWall + SocketDepth(ND_DistPipe) - CouplingLength(ND_DistPipe);
    FiEntranceBox_origin[1] - T_PlantWall - W_FiOverflow/2;
    Z_FiTop - S_Fitting - ConRadius(ND_FiBypass)
], max(T_PlantWall - CouplingLength(ND_DistPipe) + 2*SocketDepth(ND_DistPipe), 2*SocketDepth(ND_DistPipe)), [0; 0]*deg, ND_FiBypass, PS_Default, ["FiOverflowDistBoxCon"])
FiOverflowDrainPipeVert := PipeSUBF([
    FiEntranceBox_origin[0] - L_FiEntrance/2;
    FiEntranceBox_origin[1] - T_PlantWall - W_FiOverflow/2;
    Z_FiOverflowVertDrainPipeStart
], Z_FiOverflowVertDrainPipeStart - Z_FiOverflowVertDrainPipeEnd, [0; 270]*deg, ND_FiEntOverflow, PS_Default, ["FiOverflowDistBoxCon"])
FiOverflowDrainPipeHoriz := PipeSUBF([
    X_FiOverflowHorizDrainPipeStart;
    FiEntranceBox_origin[1] - T_PlantWall - W_FiOverflow/2;
    Z_FiOverflowVertDrainPipeEnd - ElbowRadius(ND_FiEntOverflow)
], X_FiOverflowHorizDrainPipeStart - X_FiOverflowHorizDrainPipeEnd, [0; 0], ND_FiEntOverflow, PS_Default, ["DrainChannelCon"])
LayerFiAuxPipeFrz := FreezeLayer("FiAuxPipePlu")
FiAuxPipeScript := stack(FiAuxPipeLayer, FiBypassPipeHoriz, FiOverflowDrainPipeVert, FiOverflowDrainPipeHoriz, LayerFiAuxPipeFrz)
FiAuxPlumbingScript := stack(FiAuxFittingScript, FiDistStartScript, FiAuxPipeScript)
# Entrance and Exit Plumbing Until Filter Wall Coupling
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# This is all of the piping between filter box, entrance and exit
# In means the pipe goes IN TO THE FILTER
# Out means it comes OUT OF THE FILTER
SelectFiPipeLayer := SelectLayer("FiPipePlu")
SelectFiFittingLayer := SelectLayer("FiFittingsPlu")
# Inlet 0 Pipes (backwash)
Z_FiInPipe0aStart := FiEntranceBox_origin[2] - CouplingLength(ND_FiBwTrunk) + SocketDepth(ND_FiBwTrunk)
Z_FiInPipe0aEnd := Fi_origin[2] + outerradius(ND_FiBwManBranch) + ShortTeeLength(ND_FiBwTrunk)
FiInPipe0a := PipeSUBF(FiBwInletCoupling_origin, FiBwInletCoupling_origin[2] - Z_FiInPipe0aEnd, [0; 270]*deg, ND_FiBwTrunk, PS_Default, ["FiEntBoxCon"])
X_FiBwTrunkPipeEnd := Fi_origin[0] + T_FiWall + L_FiManFerncoCoupling/2
FiInPipe0b := PipeSUBF([
    FiBwInletCoupling_origin[0] - ShortTeeLength(ND_FiBwTrunk);
    FiBwInletCoupling_origin[1];
    Z_FiInPipe0aEnd - ShortTeeLength(ND_FiBwTrunk)
], FiBwInletCoupling_origin[0] - TeeLength(ND_FiBwTrunk)/2 - X_FiBwTrunkPipeEnd, [0; 0]*deg, ND_FiBwTrunk, PS_Default, ["FiTankCon"])
FiIn0PipeScript := stack(FiInPipe0a, FiInPipe0b)
# Inlet 0 Fittings (backwash)
FiEntBoxCoupling0 := CouplingSUBF(FiBwInletCoupling_origin, [0; 90]*deg, ND_FiBwTrunk, PS_Default, ["FiEntBoxCon"])
FiInTee0a := TeeF([FiBwInletCoupling_origin[0]; FiBwInletCoupling_origin[1]; Z_FiInPipe0aEnd], [0; 0; 90]*deg, ND_FiBwTrunk, PS_Default)
FiInReducerLarge := CylinderF([
    FiBwInletCoupling_origin[0] + ShortTeeLength(ND_FiBwTrunk) + 10 cm;
    FiBwInletCoupling_origin[1];
    Z_FiInPipe0aEnd - ShortTeeLength(ND_FiBwTrunk)
], innerdiameter(ND_FiBwTrunk, PS_Default)/2, 10 cm, [0; 0]*deg)
FiInReducerSmall := CylinderF([
    FiBwInletCoupling_origin[0] + ShortTeeLength(ND_FiBwTrunk) + 2*10*cm;
    FiBwInletCoupling_origin[1];
    Z_FiInPipe0aEnd - ShortTeeLength(ND_FiBwTrunk)
], innerdiameter(3 in, PS_Default)/2, 10 cm, [0; 0]*deg)
FiValveLayer := layer_new("FiValvePlu", blue3)
FiInValve := insertdwg("VAL-Scaled-Gate-Valve-Threaded", [
    FiBwInletCoupling_origin[0] + ShortTeeLength(ND_FiBwTrunk) + 2*10*cm + 0.6*ValveLength(3 in);
    FiBwInletCoupling_origin[1];
    Z_FiInPipe0aEnd - ShortTeeLength(ND_FiBwTrunk)
], 3 in/(1.16 m), 3 in/(1.16 m), 0 deg)
# The valve length and socket functions are not returning the correct numbers, so for now, I am arbitrarily setting the valve over by 60% of its length as returned by the function
LayerFiValveFrz := FreezeLayer("FiValvePlu")
FiIn0FittingScript := stack(FiEntBoxCoupling0, FiInTee0a, FiInReducerLarge, FiInReducerSmall, LayerFiFittingFrz, FiValveLayer, FiInValve, LayerFiValveFrz, SelectFiFittingLayer)
# Inlet 1 Pipes
Z_FiInPipe1aEnd := Fi_origin[2] + outerradius(ND_FiBwManBranch) + H_FiBottomLayer + H_FiLayer + ElbowRadius(ND_FiTrunk)
FiInPipe1a := PipeSUBF(FiInletCoupling1_origin, FiInletCoupling1_origin[2] - Z_FiInPipe1aEnd, [0; 270]*deg, ND_FiTrunk, PS_Default, ["FiEntBoxesCon"])
X_FiTrunkPipeEnd := Fi_origin[0] + T_FiWall + L_FiManFerncoCoupling/2
FiInPipe1b := PipeSUBF([
    FiInletCoupling1_origin[0] - ElbowRadius(ND_FiTrunk);
    FiBwInletCoupling_origin[1];
    Z_FiInPipe1aEnd - ElbowRadius(ND_FiTrunk)
], FiInletCoupling1_origin[0] - ElbowRadius(ND_FiTrunk) - X_FiTrunkPipeEnd, [0; 0]*deg, ND_FiTrunk, PS_Default, ["FiTankCon"])
FiEnt1PipeStub := PipeF(FiInletCoupling1_origin + [0 m; 0 m; CouplingLength(ND_FiTrunk) - 2*SocketDepth(ND_FiTrunk)], Z_FiEntranceStub - Z_FiEntranceBottom + SocketDepth(ND_FiTrunk), [0; 90]*deg, ND_FiTrunk, PS_Default)
FiIn1PipeScript := stack(FiInPipe1a, FiInPipe1b, FiEnt1PipeStub)
# Inlet 1 Fittings
FiEntBoxCoupling1 := CouplingSUBF(FiInletCoupling1_origin, [0; 90]*deg, ND_FiTrunk, PS_Default, ["FiEntBoxCon"])
FiInElbow1a := ElbowF([FiInletCoupling1_origin[0]; FiInletCoupling1_origin[1]; Z_FiInPipe1aEnd], [0; 0; -90]*deg, ND_FiTrunk, PS_Default)
FiIn1FittingScript := stack(FiEntBoxCoupling1, FiInElbow1a)
# Inlet 2 Pipes
Z_FiInPipe2aEnd := Z_FiInPipe1aEnd + 2*H_FiLayer
X_FiInPipe2bEnd := FiExitCoupling1_origin[0] - ConRadius(ND_FiTrunk) - T_ConcreteMin  # Gives 5 cm of clearance plus the elbow radius
FiInPipe2a := PipeSUBF(FiInletCoupling2_origin, FiInletCoupling2_origin[2] - Z_FiInPipe2aEnd, [0; 270]*deg, ND_FiTrunk, PS_Default, ["FiEntexitboxesCon"])
FiInPipe2b := PipeF([
    FiInletCoupling2_origin[0] - ElbowRadius(ND_FiTrunk);
    FiInletCoupling2_origin[1];
    Z_FiInPipe2aEnd - ElbowRadius(ND_FiTrunk)
], FiInletCoupling2_origin[0] - ElbowRadius(ND_FiTrunk) - X_FiInPipe2bEnd, [0; 0]*deg, ND_FiTrunk, PS_Default)
Y_FiInPipe2cEnd := Fi_origin[1] + W_Fi/2 - ElbowRadius(ND_FiTrunk)  # This is BwTrunk because the Fi Trunks line up with that one
FiInPipe2c := PipeF([
    X_FiInPipe2bEnd - ElbowRadius(ND_FiTrunk);
    FiInletCoupling2_origin[1] + ElbowRadius(ND_FiTrunk);
    Z_FiInPipe2aEnd - ElbowRadius(ND_FiTrunk)
], Y_FiInPipe2cEnd - (FiInletCoupling2_origin[1] + ElbowRadius(ND_FiTrunk)), [-90; 0]*deg, ND_FiTrunk, PS_Default)
FiInPipe2d := PipeSUBF([
    X_FiInPipe2bEnd - 2*ElbowRadius(ND_FiTrunk);
    Y_FiInPipe2cEnd + ElbowRadius(ND_FiTrunk);
    Z_FiInPipe2aEnd - ElbowRadius(ND_FiTrunk)
], X_FiInPipe2bEnd - 2*ElbowRadius(ND_FiTrunk) - X_FiTrunkPipeEnd, [0; 0]*deg, ND_FiTrunk, PS_Default, ["FiTankCon"])
FiEnt2PipeStub := PipeF(FiInletCoupling2_origin + [0 m; 0 m; CouplingLength(ND_FiTrunk) - 2*SocketDepth(ND_FiTrunk)], Z_FiEntranceStub - Z_FiEntranceBottom + SocketDepth(ND_FiTrunk), [0; 90]*deg, ND_FiTrunk, PS_Default)
FiIn2PipeScript := stack(FiInPipe2a, FiInPipe2b, FiInPipe2c, FiInPipe2d, FiEnt2PipeStub)
# Inlet 2 Fittings
FiEntBoxCoupling2 := CouplingSUBF(FiInletCoupling2_origin, [0; 90]*deg, ND_FiTrunk, PS_Default, ["FiEntBoxCon"])
FiInElbow2a := ElbowF([FiInletCoupling2_origin[0]; FiInletCoupling2_origin[1]; Z_FiInPipe2aEnd], [0; 0; -90]*deg, ND_FiTrunk, PS_Default)
FiInElbow2b := ElbowF([X_FiInPipe2bEnd; FiInletCoupling2_origin[1]; Z_FiInPipe2aEnd - ElbowRadius(ND_FiTrunk)], [-90; 180; 0]*deg, ND_FiTrunk, PS_Default)
FiInElbow2c := ElbowF([
    X_FiInPipe2bEnd - ElbowRadius(ND_FiTrunk);
    Y_FiInPipe2cEnd;
    Z_FiInPipe2aEnd - ElbowRadius(ND_FiTrunk)
], [0; 0; 0]*deg, ND_FiTrunk, PS_Default)
FiIn2FittingScript := stack(FiEntBoxCoupling2, FiInElbow2a, FiInElbow2b, FiInElbow2c)
# Inlet 3 Pipes
Z_FiInPipe3aEnd := Z_FiInPipe2aEnd + 2*H_FiLayer
FiInPipe3a := PipeSUBF(FiInletCoupling3_origin, FiInletCoupling3_origin[2] - Z_FiInPipe3aEnd, [0; 270]*deg, ND_FiTrunk, PS_Default, ["FiEntexitboxesCon"])
X_FiInPipe3bEnd := X_FiInPipe2bEnd
FiInPipe3b := PipeF([
    FiInletCoupling3_origin[0] - ElbowRadius(ND_FiTrunk);
    FiInletCoupling3_origin[1];
    Z_FiInPipe3aEnd - ElbowRadius(ND_FiTrunk)
], FiInletCoupling3_origin[0] - ElbowRadius(ND_FiTrunk) - X_FiInPipe3bEnd, [0; 0]*deg, ND_FiTrunk, PS_Default)
Y_FiInPipe3cEnd := Y_FiInPipe2cEnd
FiInPipe3c := PipeF([
    X_FiInPipe3bEnd - ElbowRadius(ND_FiTrunk);
    FiInletCoupling3_origin[1] + ElbowRadius(ND_FiTrunk);
    Z_FiInPipe3aEnd - ElbowRadius(ND_FiTrunk)
], Y_FiInPipe3cEnd - (FiInletCoupling3_origin[1] + ElbowRadius(ND_FiTrunk)), [-90; 0]*deg, ND_FiTrunk, PS_Default)
FiInPipe3d := PipeSUBF([
    X_FiInPipe3bEnd - 2*ElbowRadius(ND_FiTrunk);
    Y_FiInPipe3cEnd + ElbowRadius(ND_FiTrunk);
    Z_FiInPipe3aEnd - ElbowRadius(ND_FiTrunk)
], X_FiInPipe3bEnd - 2*ElbowRadius(ND_FiTrunk) - X_FiTrunkPipeEnd, [0; 0]*deg, ND_FiTrunk, PS_Default, ["FiTankCon"])
FiEnt3PipeStub := PipeF(FiInletCoupling3_origin + [0 m; 0 m; CouplingLength(ND_FiTrunk) - 2*SocketDepth(ND_FiTrunk)], Z_FiEntranceStub - Z_FiEntranceBottom + SocketDepth(ND_FiTrunk), [0; 90]*deg, ND_FiTrunk, PS_Default)
FiIn3PipeScript := stack(FiInPipe3a, FiInPipe3b, FiInPipe3c, FiInPipe3d, FiEnt3PipeStub)
# Inlet 3 Fittings
FiEntBoxCoupling3 := CouplingSUBF(FiInletCoupling3_origin, [0; 90]*deg, ND_FiTrunk, PS_Default, ["FiEntBoxCon"])
FiInElbow3a := ElbowF([FiInletCoupling3_origin[0]; FiInletCoupling3_origin[1]; Z_FiInPipe3aEnd], [0; 0; -90]*deg, ND_FiTrunk, PS_Default)
FiInElbow3b := ElbowF([X_FiInPipe3bEnd; FiInletCoupling3_origin[1]; Z_FiInPipe3aEnd - ElbowRadius(ND_FiTrunk)], [-90; 180; 0]*deg, ND_FiTrunk, PS_Default)
FiInElbow3c := ElbowF([
    X_FiInPipe3bEnd - ElbowRadius(ND_FiTrunk);
    Y_FiInPipe3cEnd;
    Z_FiInPipe3aEnd - ElbowRadius(ND_FiTrunk)
], [0; 0; 0]*deg, ND_FiTrunk, PS_Default)
FiIn3FittingScript := stack(FiEntBoxCoupling3, FiInElbow3a, FiInElbow3b, FiInElbow3c)
# Outlet 0 Pipes
Z_FiOutPipe0aEnd := Z_FiInPipe1aEnd + H_FiLayer
FiOutPipe0a := PipeSUBF(FiExitCoupling0_origin, FiExitCoupling0_origin[2] - Z_FiOutPipe0aEnd, [0; -90]*deg, ND_FiTrunk, PS_Default, ["FiEntExitBoxCon"])
FiOutPipe0b := PipeF([
    FiExitCoupling0_origin[0] - ElbowRadius(ND_FiTrunk);
    FiExitCoupling0_origin[1];
    Z_FiOutPipe0aEnd - ElbowRadius(ND_FiTrunk)
], FiExitCoupling0_origin[0] - ElbowRadius(ND_FiTrunk) - X_FiTrunkPipeEnd, [0; 0]*deg, ND_FiTrunk, PS_Default)
FiExit0PipeStub := PipeF(FiExitCoupling0_origin + [0 m; 0 m; CouplingLength(ND_FiTrunk) - 2*SocketDepth(ND_FiTrunk)], Z_FiExitStub - Z_FiExitBottom + SocketDepth(ND_FiTrunk), [0; 90]*deg, ND_FiTrunk, PS_Default)
FiOut0PipeScript := stack(FiOutPipe0a, FiOutPipe0b, FiExit0PipeStub)
# Outlet 0 Fittings
FiExChanCoupling0 := CouplingSUBF(FiExitCoupling0_origin, [0; 90]*deg, ND_FiTrunk, PS_Default, ["FiEntExitBoxCon"])
FiOutElbow0a := ElbowF([FiExitCoupling0_origin[0]; FiExitCoupling0_origin[1]; Z_FiOutPipe0aEnd], [0; 0; -90]*deg, ND_FiTrunk, PS_Default)
FiOut0FittingScript := stack(FiExChanCoupling0, FiOutElbow0a)
# Outlet 1 Pipes
Z_FiOutPipe1aEnd := Z_FiOutPipe0aEnd + 2*H_FiLayer
FiOutPipe1a := PipeSUBF(FiExitCoupling1_origin, FiExitCoupling1_origin[2] - Z_FiOutPipe1aEnd, [0; -90]*deg, ND_FiTrunk, PS_Default, ["FiEntExitBoxCon"])
FiOutPipe1b := PipeF([
    FiExitCoupling1_origin[0] - ElbowRadius(ND_FiTrunk);
    FiExitCoupling1_origin[1];
    Z_FiOutPipe1aEnd - ElbowRadius(ND_FiTrunk)
], FiExitCoupling1_origin[0] - ElbowRadius(ND_FiTrunk) - X_FiTrunkPipeEnd, [0; 0]*deg, ND_FiTrunk, PS_Default)
FiExit1PipeStub := PipeF(FiExitCoupling1_origin + [0 m; 0 m; CouplingLength(ND_FiTrunk) - 2*SocketDepth(ND_FiTrunk)], Z_FiExitStub - Z_FiExitBottom + SocketDepth(ND_FiTrunk), [0; 90]*deg, ND_FiTrunk, PS_Default)
FiOut1PipeScript := stack(FiOutPipe1a, FiOutPipe1b, FiExit1PipeStub)
# Outlet 1 Fittings
FiExChanCoupling1 := CouplingSUBF(FiExitCoupling1_origin, [0; 90]*deg, ND_FiTrunk, PS_Default, ["FiEntExitBoxCon"])
FiOutElbow1a := ElbowF([FiExitCoupling1_origin[0]; FiExitCoupling1_origin[1]; Z_FiOutPipe1aEnd], [0; 0; -90]*deg, ND_FiTrunk, PS_Default)
FiOut1FittingScript := stack(FiExChanCoupling1, FiOutElbow1a)
# Outlet 2 Pipes (exit box drain)
Z_FiExitDrainOutlet := Z_FiExitBottom - H_FiExitWasteDrop
X_FiExitHorizDrainPipeStart := FiInletChannel_Origin[0] + T_PlantWall - CouplingLength(ND_FiExitWaste) + SocketDepth(ND_FiExitWaste)
X_FiExitHorizDrainPipeEnd := FiExitCoupling3_origin[0] + ElbowRadius(ND_FiExitWaste)
FiOutPipe2a := PipeSUBF(FiExitCoupling3_origin, FiExitCoupling2_origin[2] - Z_FiExitDrainOutlet + ElbowRadius(ND_FiExitWaste), [0; -90]*deg, ND_FiExitWaste, PS_Default, ["FiEntExitBoxCon"])
FiExitDrainPipeHoriz := PipeSUBF([X_FiExitHorizDrainPipeStart; FiExitCoupling3_origin[1]; Z_FiExitDrainOutlet], X_FiExitHorizDrainPipeStart - X_FiExitHorizDrainPipeEnd, [0; 0], ND_FiExitWaste, PS_Default, ["DrainChannelCon"])
FiExit2PipeStub := PipeF(FiExitCoupling3_origin + [0 m; 0 m; CouplingLength(ND_FiExitWaste) - 2*SocketDepth(ND_FiExitWaste)], H_FiExit + SocketDepth(ND_FiExitWaste), [0; 90]*deg, ND_FiExitWaste, PS_Default)
FiOut2PipeScript := stack(FiOutPipe2a, FiExitDrainPipeHoriz, FiExit2PipeStub)
# Oulet 2 Fittings (exit box drain)
FiExChanCoupling2 := CouplingSUBF(FiExitCoupling3_origin, [0; 90]*deg, ND_FiExitWaste, PS_Default, ["FiExitBox1Con"])
FiOutElbow2a := ElbowF([
    FiExitCoupling3_origin[0] + ElbowRadius(ND_FiExitWaste);
    FiExitCoupling3_origin[1];
    Z_FiExitDrainOutlet
], [90; 0; 270]*deg, ND_FiExitWaste, PS_Default)
FiExitDrainChanCoupling := CouplingSUBF([
    FiInletChannel_Origin[0] + T_PlantWall - SocketDepth(ND_FiExitWaste);
    FiExitCoupling3_origin[1];
    Z_FiExitDrainOutlet
], [0; 0], ND_FiExitWaste, PS_Default, ["DrainChannelCon"])
FiOut2FittingScript := stack(FiExChanCoupling2, FiOutElbow2a, FiExitDrainChanCoupling)
# Outlet 3 Pipes
FiOut3PipeZ := PipeSUBF([
    FiExitCoupling2_origin[0];
    FiExitCoupling2_origin[1];
    Fi_origin[2] + ConRadius(ND_FiBwManBranch) + H_FiBottomLayer + ElbowRadius(ND_FiTrunk)
], FiExitCoupling2_origin[2] - (Fi_origin[2] + ConRadius(ND_FiBwManBranch) + H_FiLayer + ElbowRadius(ND_FiTrunk) + CouplingLength(ND_FiTrunk) - 2*SocketDepth(ND_FiTrunk)), [0; 90]*deg, ND_FiTrunk, PS_Default, ["FiEntexitboxesCon"])
FiOut3PipeX := PipeSUBF([
    FiExitCoupling2_origin[0] - ElbowRadius(ND_FiTrunk);
    FiExitCoupling0_origin[1];
    Fi_origin[2] + ConRadius(ND_FiBwManBranch) + H_FiBottomLayer
], FiExitCoupling2_origin[0] - (Fi_origin[0] + T_FiWall + L_FiManFerncoCoupling/2) - ElbowRadius(ND_FiTrunk), [0; 0]*deg, ND_FiTrunk, PS_Default, ["FiTankCon"])
FiOut3PipeY := PipeSUBF([
    FiExitCoupling2_origin[0];
    FiExitCoupling2_origin[1] + ElbowRadius(ND_FiTrunk);
    Fi_origin[2] + ConRadius(ND_FiBwManBranch) + H_FiBottomLayer
], FiExitCoupling0_origin[1] - FiExitCoupling2_origin[1] - 2*ElbowRadius(ND_FiTrunk), [270; 0]*deg, ND_FiTrunk, PS_Default, ["FiTankCon"])
FiOut3PipeStub := PipeF([
    FiExitCoupling2_origin[0];
    FiExitCoupling2_origin[1];
    FiExitCoupling2_origin[2] + CouplingLength(ND_FiTrunk) - 2*SocketDepth(ND_FiTrunk)
], Z_FiExitStub - Z_FiExitBottom + SocketDepth(ND_FiTrunk), [0; 90]*deg, ND_FiTrunk, PS_Default)
FiOut3PipeScript := stack(FiOut3PipeZ, FiOut3PipeX, FiOut3PipeY, FiOut3PipeStub)
# Outlet 3 Fittings
FiExChanCoupling3 := CouplingSUBF(FiExitCoupling2_origin, [0; 90]*deg, ND_FiTrunk, PS_Default, ["FiExitBox1Con"])
FiOut3ElbowYZ := ElbowF([
    FiExitCoupling2_origin[0];
    FiExitCoupling2_origin[1] + ElbowRadius(ND_FiTrunk);
    Fi_origin[2] + ConRadius(ND_FiBwManBranch) + H_FiBottomLayer
], [180; 270; 0]*deg, ND_FiTrunk, PS_Default)
FiOut3ElbowXY := ElbowF([
    FiExitCoupling2_origin[0];
    FiExitCoupling0_origin[1] - ElbowRadius(ND_FiTrunk);
    Fi_origin[2] + ConRadius(ND_FiBwManBranch) + H_FiBottomLayer
], [0; 0; 0]*deg, ND_FiTrunk, PS_Default)
FiOut3FittingScript := stack(FiExChanCoupling3, FiOut3ElbowYZ, FiOut3ElbowXY)
FiEntExitPipingScript := stack(SelectFiPipeLayer, FiIn0PipeScript, FiIn1PipeScript, FiIn2PipeScript, FiIn3PipeScript, FiOut0PipeScript, FiOut1PipeScript, FiOut2PipeScript, FiOut3PipeScript, LayerFiPipeFrz)
FiEntExitFittingScript := stack(SelectFiFittingLayer, FiIn0FittingScript, FiIn1FittingScript, FiIn2FittingScript, FiIn3FittingScript, FiOut0FittingScript, FiOut1FittingScript, FiOut2FittingScript, FiOut3FittingScript, LayerFiFittingFrz)
FiEntExitPlumbingScript := stack(FiEntExitPipingScript, FiEntExitFittingScript)
FiAuxScript := stack(FiAuxBoxScript, FiAuxPlumbingScript, FiEntExitPlumbingScript)
# Sand Drain
# this all needs to be updated to a wye at some point
FiSandDrainPipe_Origin := Fi_origin + [
    -L_Fi + ConRadius(ND_FiSandOutlet);
    W_Fi/2 - ConRadius(ND_FiBwTrunk) - S_Fitting;
    2*ConRadius(ND_FiBwManBranch)
]
L_FiSandDrainPipeVert := H_FiSandOutlet + CapHeight(ND_FiSandOutlet) + B_FiManifoldBranch + T_FiWall + 2*ValveLength(ND_FiSandOutlet)
FiSandDrainPipeLayer := layer_new("FiSandDrainPlu", blue)
DrawFiSandDrainPipeVert := PipeF(FiSandDrainPipe_Origin, L_FiSandDrainPipeVert, [0; 90]*deg, ND_FiSandOutlet, PS_Default)
L_FiSandDrainPipeAngled := sqrt(2)*(2*outerradius(ND_FiSandOutlet) + B_FiManifoldBranch + T_FiWall + 2*ValveLength(ND_FiSandOutlet) - (ValveLength(ND_FiSandOutlet) + ValveSocket(ND_FiSandOutlet))/sqrt(2))
DrawFiSandDrainPipeAngled := PipeSUBF([
    FiSandDrainPipe_Origin[0] - (B_FiManifoldBranch + T_FiWall + 2*ValveLength(ND_FiSandOutlet));
    FiSandDrainPipe_Origin[1];
    Fi_origin[2] + H_FiSandOutlet - (ValveLength(ND_FiSandOutlet) + ValveSocket(ND_FiSandOutlet))/sqrt(2) + 2*outerradius(ND_FiManBranch)
], L_FiSandDrainPipeAngled, [0; 135]*deg, ND_FiSandOutlet, PS_Default, ["FiTank"])
DrawFiOutletCap := CapF([0; 0; L_FiSandDrainPipeVert] + FiSandDrainPipe_Origin, [0; 270]*deg, ND_FiSandOutlet)
DrawFiSandOutletValve := insertdwg("VAL-Scaled-Gate-Valve-Threaded", [
    FiSandDrainPipe_Origin[0] - (B_FiManifoldBranch + T_FiWall + 2*ValveLength(ND_FiSandOutlet)) - (ValveLength(ND_FiSandOutlet) - ValveSocket(ND_FiSandOutlet))/sqrt(2);
    FiSandDrainPipe_Origin[1];
    Fi_origin[2] + H_FiSandOutlet - (ValveLength(ND_FiSandOutlet) + ValveSocket(ND_FiSandOutlet))/sqrt(2) + 2*outerradius(ND_FiManBranch) - (ValveLength(ND_FiSandOutlet) - ValveSocket(ND_FiSandOutlet))/sqrt(2)
], 2*outerradius(ND_FiSandOutlet)/(1.16 m), 2*outerradius(ND_FiSandOutlet)/(1.16 m), 0 deg)
RotateFiSandOutletValve1 := Rotate3DLast([
    FiSandDrainPipe_Origin[0] - (B_FiManifoldBranch + T_FiWall + 2*ValveLength(ND_FiSandOutlet)) - (ValveLength(ND_FiSandOutlet) - ValveSocket(ND_FiSandOutlet))/sqrt(2);
    FiSandDrainPipe_Origin[1];
    Fi_origin[2] + H_FiSandOutlet - (ValveLength(ND_FiSandOutlet) + ValveSocket(ND_FiSandOutlet))/sqrt(2) + 2*outerradius(ND_FiManBranch) - (ValveLength(ND_FiSandOutlet) - ValveSocket(ND_FiSandOutlet))/sqrt(2)
], "z", 180 deg)
RotateFiSandOutletValve2 := Rotate3DLast([
    FiSandDrainPipe_Origin[0] - (B_FiManifoldBranch + T_FiWall + 2*ValveLength(ND_FiSandOutlet)) - (ValveLength(ND_FiSandOutlet) - ValveSocket(ND_FiSandOutlet))/sqrt(2);
    FiSandDrainPipe_Origin[1];
    Fi_origin[2] + H_FiSandOutlet - (ValveLength(ND_FiSandOutlet) + ValveSocket(ND_FiSandOutlet))/sqrt(2) + 2*outerradius(ND_FiManBranch) - (ValveLength(ND_FiSandOutlet) - ValveSocket(ND_FiSandOutlet))/sqrt(2)
], "y", -45 deg)
FreezeFiSandDrain := FreezeLayer("FiSandDrainPlu")
FiSandDrainScript := stack(FiSandDrainPipeLayer, DrawFiSandDrainPipeVert, DrawFiSandDrainPipeAngled, DrawFiOutletCap, DrawFiSandOutletValve, RotateFiSandOutletValve1, RotateFiSandOutletValve2, FreezeFiSandDrain)
# Filter Backwash Siphon
L_FiSiphonPipeBottom := W_PlantDC/2 + FiInletChannel_Origin[0] - (Fi_origin[0] + T_FiWall + SocketDepth(ND_FiSiphon) + ShortTeeLength(ND_FiSiphon) + ElbowRadius(ND_FiSiphon)) - ElbowRadius(ND_FiSiphon) = 2.81294 m
FiSiphonChannelCoupling_Origin := [
    Fi_origin[0] + T_FiWall + SocketDepth(ND_FiSiphon) + ShortTeeLength(ND_FiSiphon) + 2*ElbowRadius(ND_FiSiphon) + L_FiSiphonPipeBottom;
    Fi_origin[1] + S_Fitting + ConRadius(ND_FiSiphon);
    PlantDC_Origin[2] - H_PlantDC - Slope_PlantDC*(L_PlantDC - Fi_origin[1] + S_Fitting + 2*ConRadius(ND_FiSiphon)) - SocketDepth(ND_FiSiphon)
]
X_FiSiphonPipe1End := Fi_origin[0] + T_FiWall - CouplingLength(ND_FiSiphon) + SocketDepth(ND_FiSiphon) - max((T_FiWall - CouplingLength(ND_FiSiphon)) + 2*SocketDepth(ND_FiSiphon), 2*SocketDepth(ND_FiSiphon))
X_FiSiphonManifoldStart := X_FiSiphonPipe1End - ElbowRadius(ND_FiSiphon) - ShortTeeLength(ND_FiSiphon)
X_FiSiphonManifoldEnd := Fi_origin[0] - L_Fi
L_FiSiphonChannelStub := Z_FiSiphonOutlet - FiSiphonChannelCoupling_Origin[2] = 0.146648 m
# Siphon Fittings
FiSiphonCoupling := CouplingSUBF([
    Fi_origin[0] + T_FiWall - SocketDepth(ND_FiSiphon);
    Fi_origin[1] + S_Fitting + ConRadius(ND_FiSiphon);
    Z_FiSiphonCoupling
], [0; 0]*deg, ND_FiSiphon, PS_Default, ["FiTankCon"])
FiSiphonChannelCoupling := CouplingSUBF(FiSiphonChannelCoupling_Origin, [0; 270]*deg, ND_FiSiphon, PS_Default, ["DrainChannelCon"])
FiSiphonTee := TeeF([
    Fi_origin[0] - L_Fi/2;
    Fi_origin[1] + S_Fitting + ConRadius(ND_FiSiphon);
    Z_FiSiphonInlet + ShortTeeLength(ND_FiSiphon)
], [0; 0; 90]*deg, ND_FiSiphon, PS_Default)
FiSiphonElbow1 := ElbowF([
    Fi_origin[0] - L_Fi/2 + ElbowRadius(ND_FiSiphon);
    Fi_origin[1] + S_Fitting + ConRadius(ND_FiSiphon);
    Z_FiSiphonCoupling
], [90; 0; 90]*deg, ND_FiSiphon, PS_Default)
FiSiphonManifoldCap1 := CapF([
    X_FiSiphonManifoldEnd + ConRadius(ND_FiSiphon) - outerradius(ND_FiSiphon);
    Fi_origin[1] + S_Fitting + ConRadius(ND_FiSiphon);
    Z_FiSiphonInlet
], [180; 0]*deg, ND_FiSiphon)
FiSiphonManifoldCap2 := CapF([
    Fi_origin[0] - ConRadius(ND_FiSiphon) + outerradius(ND_FiSiphon);
    Fi_origin[1] + S_Fitting + ConRadius(ND_FiSiphon);
    Z_FiSiphonInlet
], [0; 0]*deg, ND_FiSiphon)
FiSiphonTee2 := TeeF([
    Fi_origin[0] + T_FiWall + SocketDepth(ND_FiSiphon);
    Fi_origin[1] + S_Fitting + ConRadius(ND_FiSiphon);
    Z_FiSiphonCoupling
], [90; 0; 90]*deg, ND_FiSiphon, PS_Default)
FiSiphonElbow0 := ElbowF([
    Fi_origin[0] + T_FiWall + SocketDepth(ND_FiSiphon) + ShortTeeLength(ND_FiSiphon) + ElbowRadius(ND_FiSiphon);
    Fi_origin[1] + S_Fitting + ConRadius(ND_FiSiphon);
    Fi_origin[2]
], [90; 0; 270]*deg, ND_FiSiphon, PS_Default)
FiSiphonElbow01 := ElbowF([
    Fi_origin[0] + T_FiWall + SocketDepth(ND_FiSiphon) + ShortTeeLength(ND_FiSiphon) + ElbowRadius(ND_FiSiphon) + L_FiSiphonPipeBottom;
    Fi_origin[1] + S_Fitting + ConRadius(ND_FiSiphon);
    Fi_origin[2]
], [270; 0; 90]*deg, ND_FiSiphon, PS_Default)
FiSiphonReducerCyl1 := CylinderF([
    Fi_origin[0] + T_FiWall + SocketDepth(ND_FiSiphon) + ShortTeeLength(ND_FiSiphon);
    Fi_origin[1] + S_Fitting + ConRadius(ND_FiSiphon);
    Z_FiSiphonCoupling + ShortTeeLength(ND_FiSiphon)
], outerradius(ND_FiSiphon), SocketDepth(ND_FiSiphon), [0; 90]*deg)
FiSiphonReducerCyl2 := CylinderF([
    Fi_origin[0] + T_FiWall + SocketDepth(ND_FiSiphon) + ShortTeeLength(ND_FiSiphon);
    Fi_origin[1] + S_Fitting + ConRadius(ND_FiSiphon);
    Z_FiSiphonCoupling + ShortTeeLength(ND_FiSiphon)
], outerradius(ND_FiSiphonAirValve), SocketDepth(ND_FiSiphon), [0; 90]*deg)
FiSiphonReducerSubtract := SubtractF(["FiFittingsPlu"], "DeleteMe")
SelectFiValveLayer := SelectLayer("FiValvePlu")
FiSiphonAirValve := insertdwg("MetalBallValve", [
    Fi_origin[0] + T_FiWall + SocketDepth(ND_FiSiphon) + ShortTeeLength(ND_FiSiphon);
    Fi_origin[1] + S_Fitting + ConRadius(ND_FiSiphon);
    Z_FiSiphonCoupling + ShortTeeLength(ND_FiSiphon) + SocketDepth(ND_FiSiphon)
], 2*outerradius(ND_FiSiphonAirValve)*1/(125 in), 2*outerradius(ND_FiSiphonAirValve)*1/(125 in), 0 deg)
FiSiphonAirValveReducer := stack(FiSiphonReducerCyl1, LayerFiFittingFrz, FiSiphonReducerCyl2, GroupDelete, FiSiphonReducerSubtract)
FiSiphonFittingScript := stack(SelectFiFittingLayer, FiSiphonCoupling, FiSiphonChannelCoupling, FiSiphonTee, FiSiphonElbow1, FiSiphonManifoldCap1, FiSiphonManifoldCap2, FiSiphonTee2, FiSiphonElbow0, FiSiphonElbow01, FiSiphonAirValveReducer, SelectFiValveLayer, FiSiphonAirValve, LayerFiValveFrz)
# Siphon Pipes
FiSiphonPipe1 := PipeSUBF([
    Fi_origin[0] + T_FiWall - CouplingLength(ND_FiSiphon) + SocketDepth(ND_FiSiphon);
    Fi_origin[1] + S_Fitting + ConRadius(ND_FiSiphon);
    Z_FiSiphonCoupling
], L_Fi/2 - ElbowRadius(ND_FiSiphon) + T_FiWall - CouplingLength(ND_FiSiphon) + SocketDepth(ND_FiSiphon), [0; 0]*deg, ND_FiSiphon, PS_Default, ["FiTankCon"])
FiSiphonPipe2 := PipeF([
    Fi_origin[0] - L_Fi/2;
    Fi_origin[1] + S_Fitting + ConRadius(ND_FiSiphon);
    Z_FiSiphonCoupling - ElbowRadius(ND_FiSiphon)
], Z_FiSiphonCoupling - ElbowRadius(ND_FiSiphon) - (Z_FiSiphonInlet + ShortTeeLength(ND_FiSiphon)), [0; -90]*deg, ND_FiSiphon, PS_Default)
FiSiphonManifold1 := PipeF([
    Fi_origin[0] - L_Fi/2 - ShortTeeLength(ND_FiSiphon);
    Fi_origin[1] + S_Fitting + ConRadius(ND_FiSiphon);
    Z_FiSiphonInlet
], L_Fi/2 - ShortTeeLength(ND_FiSiphon) - ConRadius(ND_FiSiphon) + outerradius(ND_FiSiphon), [0; 0]*deg, ND_FiSiphon, PS_Default)
FiSiphonManifold2 := PipeF([
    Fi_origin[0] - ConRadius(ND_FiSiphon) + outerradius(ND_FiSiphon);
    Fi_origin[1] + S_Fitting + ConRadius(ND_FiSiphon);
    Z_FiSiphonInlet
], L_Fi/2 - ShortTeeLength(ND_FiSiphon) - ConRadius(ND_FiSiphon) + outerradius(ND_FiSiphon), [0; 0]*deg, ND_FiSiphon, PS_Default)
FiSiphonPipe3 := PipeF([
    Fi_origin[0] + T_FiWall - SocketDepth(ND_FiSiphon);
    Fi_origin[1] + S_Fitting + ConRadius(ND_FiSiphon);
    Z_FiSiphonCoupling
], 2*SocketDepth(ND_FiSiphon), [180; 0]*deg, ND_FiSiphon, PS_Default)
FiSiphonPipe4 := PipeF([
    Fi_origin[0] + T_FiWall + SocketDepth(ND_FiSiphon) + ShortTeeLength(ND_FiSiphon);
    Fi_origin[1] + S_Fitting + ConRadius(ND_FiSiphon);
    Z_FiSiphonCoupling - ShortTeeLength(ND_FiSiphon)
], Z_FiSiphonCoupling - ElbowRadius(ND_FiSiphon) - ShortTeeLength(ND_FiSiphon) - Fi_origin[2], [0; -90]*deg, ND_FiSiphon, PS_Default)
FiSiphonPipe5 := PipeF([
    Fi_origin[0] + T_FiWall + SocketDepth(ND_FiSiphon) + ShortTeeLength(ND_FiSiphon) + ElbowRadius(ND_FiSiphon) + L_FiSiphonPipeBottom;
    Fi_origin[1] + S_Fitting + ConRadius(ND_FiSiphon);
    Fi_origin[2]
], L_FiSiphonPipeBottom, [0; 0], ND_FiSiphon, PS_Default)
FiSiphonChannelPipe := PipeSUBF([
    Fi_origin[0] + T_FiWall + SocketDepth(ND_FiSiphon) + ShortTeeLength(ND_FiSiphon) + 2*ElbowRadius(ND_FiSiphon) + L_FiSiphonPipeBottom;
    Fi_origin[1] + S_Fitting + ConRadius(ND_FiSiphon);
    Fi_origin[2] + ElbowRadius(ND_FiSiphon)
], Z_FiBottom + ElbowRadius(ND_FiSiphon) - (FiSiphonChannelCoupling_Origin[2] - CouplingLength(ND_FiSiphon) + 2*SocketDepth(ND_FiSiphon)), [0; -90]*deg, ND_FiSiphon, PS_Default, ["DrainChannelCon"])
FiSiphonChannelStub := PipeF(FiSiphonChannelCoupling_Origin + [0 m; 0 m; 0 m], L_FiSiphonChannelStub, [0; 90; 0]*deg, ND_FiSiphon, PS_Default)
# maybe don't need this pipe?
FiSiphonAirPipe1 := PipeF([
    Fi_origin[0] + T_FiWall + SocketDepth(ND_FiSiphon) + ShortTeeLength(ND_FiSiphon);
    Fi_origin[1] + S_Fitting + ConRadius(ND_FiSiphon);
    Z_FiSiphonCoupling + ShortTeeLength(ND_FiSiphon)
], Fi_origin[2] + H_Fi - (Z_FiSiphonCoupling + ShortTeeLength(ND_FiSiphon)), [0; 90]*deg, ND_FiSiphonAirValve, PS_Default)
FiSiphonPipeScript := stack(SelectFiPipeLayer, FiSiphonPipe1, FiSiphonPipe2, FiSiphonManifold1, FiSiphonManifold2, FiSiphonPipe3, FiSiphonPipe4, FiSiphonPipe5, FiSiphonChannelPipe, FiSiphonChannelStub, FiSiphonAirPipe1, LayerFiPipeFrz)
# Siphon Manifold Orifices
FirstFiSiphonManOrifice := CylinderF([
    Fi_origin[0] - B_FiSiphonManOrifices/2 - ConRadius(ND_FiSiphon) + outerradius(ND_FiSiphon);
    Fi_origin[1] + S_Fitting + ConRadius(ND_FiSiphon);
    Z_FiSiphonInlet
], D_FiSiphonManOrifices/2, 1.2*ConRadius(ND_FiSiphon), [0; 90]*deg)
ArrayFiSiphonManOrifices := array_all(1, N_FiSiphonManOrifices/2, -B_FiSiphonManOrifices)
MirrorFiSiphonManOrifices := Mirror3dAll("yz", [Fi_origin[0] - L_Fi/2; 0 m], "n")
FiSiphonOrifices := stack(FirstFiSiphonManOrifice, ArrayFiSiphonManOrifices, MirrorFiSiphonManOrifices)
SubtractFiSiphonOrificesPipe := SubtractF(["FiPipePlu"], "DeleteMe")
SubtractFiSiphonOrificesCaps := SubtractF(["FiFittingPlu"], "DeleteMe")
FiSiphonManOrificeScript := stack(FiSiphonOrifices, GroupDelete, SubtractFiSiphonOrificesPipe, FiSiphonOrifices, GroupDelete, SubtractFiSiphonOrificesCaps)
FiSiphonScript := stack(FiSiphonFittingScript, FiSiphonPipeScript, FiSiphonManOrificeScript)
# Array the Filter
ThawFilter := ThawMultiple(["Fi*"])
FiArray1Frz := ["FiAuxPipePlu"; "FiAuxFittingPlu"; "FiDistPipePlu"; "FiDistFittingPlu"; "FiOverflowDistBoxCon"; "FiInletChannelCon"]
FreezeFiPieces := FreezeMultiple(FiArray1Frz)
ArrayFi1 := Array_All(N_Fi, 1, -(W_Fi + T_FiWall))
FreezeRestFi := FreezeMultiple(["Fi*"])
FiArray2Thw := ["FiAuxPipePlu"; "FiAuxFittingPlu"; "FiDistPipePlu"; "FiDistFittingPlu"; "FiOverflowDistBoxCon"]
ThawFiPieces := ThawMultiple(FiArray2Thw)
ArrayFi2 := Array_All(N_Fi - (N_Fi > 1), 1, -(W_FiEntrance + 2*T_PlantWall + W_FiOverflow))
FiArrayScript := stack(ThawFilter, FiArray1Frz, FreezeFiPieces, ArrayFi1, FreezeRestFi, FiArray2Thw, ThawFiPieces, ArrayFi2, FreezeRestFi)
# Overflow, Inlet and Distribution Weirs
FiEntWeir := BoxF(FiEntranceBox_origin + [T_PlantWall; 0 m; 0 m], FiEntranceBox_origin + [T_PlantWall; 0 m; 0 m] + FiEntranceWeir_dim, [0; 0; 0]*deg)
ArrayFiEntWeir := ArrayLast(N_Fi, 1, 2*T_PlantWall + W_FiEntrance + W_FiOverflow)
SubtractFiEntWeir := SubtractF(["FiInletChannelCon"], "DeleteMe")
FiOverflowWeir := BoxF([
    FiEntranceBox_origin[0] - L_FiEntrance;
    FiEntranceBox_origin[1] - T_PlantWall - zc;
    Z_FiOverflowWeir
], [FiEntranceBox_origin[0] - L_FiEntrance + L_FiOverflowWeir; FiEntranceBox_origin[1] + zc; Z_FiTop], [0; 0; 0]*deg)
MirrorFiWeir := MirrorLast([FiOverflowBox_Origin[0]; FiOverflowBox_Origin[1] + W_FiOverflow/2], [FiOverflowBox_Origin[0] - zc; FiOverflowBox_Origin[1] + W_FiOverflow/2], "n")
FiDistBarrierCut := BoxF(FiExitBox_origin + [0 m; W_FiEntrance; H_FiExit], FiExitBox_origin + [
    -L_FiExit;
    W_FiEntrance - N_Fi*W_FiEntrance - (N_Fi - (N_Fi > 1))*(W_FiOverflow + 2*T_PlantWall);
    H_FiDistBarrier
], [0; 0; 0]*deg)
# GroupAll
FiSubtractOverflowWeirs := SubtractF(["FiEntExitBoxCon"; "FiInletchannelCon"; "FiOverflowDistBoxCon"], "DeleteMe")
FiWeirs := stack(FiEntWeir, ArrayFiEntWeir, FiOverflowWeir, MirrorFiWeir, FiDistBarrierCut, GroupDelete, FiSubtractOverflowWeirs)
# Inlet Channel Piping
FiChannelCoupling_Origin :=
    if SedOutletVertPipe_Origin[1] ≥ FiInletChannel_Origin[1]
        FiInletChannel_Origin + [
            CouplingLength(ND_FiEntrancePipe) - SocketDepth(ND_FiEntrancePipe);
            S_Fitting + ConRadius(ND_FiEntrancePipe);
            S_Fitting + ConRadius(ND_FiEntrancePipe)
        ]
    otherwise
        FiInletChannel_Origin + [
            -S_Fitting - ConRadius(ND_FiEntrancePipe);
            -SocketDepth(ND_FiEntrancePipe);
            S_Fitting + ConRadius(ND_FiEntrancePipe)
        ]
FiChannelCoupling_Origin := [
    FiInletChannel_Origin[0] + CouplingLength(ND_FiEntrancePipe) - SocketDepth(ND_FiEntrancePipe);
    SedOutletCoupling_Origin[1];
    SedOutletElbow1_Origin[2] - ElbowRadius(ND_FiEntrancePipe)
]
L_FiInletYChannelPipe := max(0, Et_Origin[1] - W_Fi - T_PlantWall - W_EtWalkway - T_FiWall - Fi_origin[1] + (Plant_Origin[1] - max((W_Fi + T_FiWall)*N_Fi, (2*W_FiEntrance + W_FiOverflow + 4*T_PlantWall)*ceil(N_Fi/2) - T_PlantWall + (W_Fi - W_FiOverflow/2 - T_PlantWall - W_FiEntrance + T_FiWall/2))) - ElbowRadius(ND_FiEntrancePipe) - CouplingLength(ND_FiEntrancePipe) + SocketDepth(ND_FiEntrancePipe) - SedOutletCoupling_Origin[1])
FiInletCouplingLayer := layer_new("FiInletChannelFittingsPlu", green)
FiInletCoupling := CouplingSUBF(FiChannelCoupling_Origin, [
    {
        90 if L_FiInletYChannelPipe > 0
        0 otherwise
    };
    0
]*deg, ND_FiEntrancePipe, PS_Default, ["FiEntexitboxesCon"])
FiInletElbow := ElbowF(FiChannelCoupling_Origin - [0; L_FiInletYChannelPipe + CouplingLength(ND_FiEntrancePipe) - 2*SocketDepth(ND_FiEntrancePipe); 0], [180; 0; 0]*deg, ND_FiEntrancePipe, PS_Default)
FiInletCouplingFrz := FreezeLayer("FiInletChannelFittingsPlu")
L_FiInletChannelXPipe := SedOutletVertPipe_Origin[0] - ElbowRadius(ND_FiEntrancePipe) - FiChannelCoupling_Origin[0]
FiInletChannelPipeLayer := layer_new("FiInletChannelPipePlu", blue)
FiInletChannelYPipe := PipeSUBF(FiChannelCoupling_Origin - [0; CouplingLength(ND_FiEntrancePipe) - 2*SocketDepth(ND_FiEntrancePipe); 0], L_FiInletYChannelPipe, [90; 0]*deg, ND_FiEntrancePipe, PS_Default, ["FiEntexitboxesCon"])
FiInletHorizPipeStart := SedOutletElbow1_Origin[0] - ElbowRadius(ND_FiEntrancePipe)
FiInletHorizPipeEnd := FiInletChannel_Origin[0] - L_Sed - 2*T_ChannelWall - W_DC + CouplingLength(ND_FiEntrancePipe) - SocketDepth(ND_FiEntrancePipe)  # error: This variable is undefined.
FiInletChannelPipeFrz := FreezeLayer("FiInletChannelPipePlu")
FiChannelPlumbing :=
    stack(FiInletCouplingLayer, FiInletCoupling, FiInletCouplingFrz, FiInletChannelPipeLayer, FiInletChannelPipeFrz) if L_FiInletYChannelPipe ≤ 0
    stack(FiInletCouplingLayer, FiInletCoupling, FiInletElbow, FiInletCouplingFrz, FiInletChannelPipeLayer, FiInletChannelYPipe, FiInletChannelPipeFrz) otherwise
AC_Filter :=
    stack(FiInletChannelScript, FiAuxScript, FiScript, FiSandDrainScript, FiSiphonScript, FiEntExitScript, FiExitChannel, FiDist, FiChannelPlumbing) if N_Fi == 1
    stack(FiInletChannelScript, FiAuxScript, FiScript, FiSandDrainScript, FiEntExitScript, ThawFilter, FreezeFiPieces, ArrayFi1, FreezeRestFi, FiSiphonScript, ThawFiEntExit, FreezeFiEntExit, ThawFiOverflow, FreezeFiOverflow, FreezeRestFi, FiWeirs, FiExitChannel, FiDist, FiChannelPlumbing) if N_Fi == 2
    stack(FiInletChannelScript, FiAuxScript, FiScript, FiSandDrainScript, FiEntExitScript, ThawFilter, FreezeFiPieces, ArrayFi1, FreezeRestFi, FiSiphonScript, ThawFiEntExit, FreezeFiEntExit, ThawFiOverflow, FreezeFiOverflow, FreezeRestFi, ThawFiAux, ArrayFiAux, LayerFiOverflowFreeze, FreezeRestFi, FiWeirs, FiExitChannel, FiDist, FiChannelPlumbing) otherwise  # error: This variable is undefined.
# Manifold Key Pipe (not currently stacked/drawn)
FiKeyPipeLayer := layer_new("FiKeypipePlu", blue)
DrawFiKeyPipeCap := CapSUBF([
    -L_Fi + ConRadius(ND_FiKeyPipe);
    W_Fi/2;
    -CapHeight(ND_FiKeyPipe) + ConRadius(ND_FiKeyPipe) - outerradius(ND_FiKeyPipe) - ConRadius(ND_FiBwTrunk) + ConRadius(ND_FiBwManBranch)
] + Fi_origin, [0; 90; 0]*deg, ND_FiKeyPipe, ["FiTankCon"])
DrawFiKeyPipeBottom := PipeF([
    -L_Fi + ConRadius(ND_FiKeyPipe);
    W_Fi/2;
    -CapHeight(ND_FiKeyPipe) + ConRadius(ND_FiKeyPipe) - outerradius(ND_FiKeyPipe) - ConRadius(ND_FiBwTrunk) + ConRadius(ND_FiBwManBranch)
] + Fi_origin, ConRadius(ND_FiBwTrunk) - ConRadius(ND_FiBwManBranch) + N_FiLayer*H_FiLayer + ConRadius(ND_FiBwManBranch) + ConRadius(ND_FiTrunk) + CapHeight(ND_FiKeyPipe) + outerradius(ND_FiKeyPipe) - ShortTeeLength(ND_FiKeyPipe), [0; 90]*deg, ND_FiKeyPipe, PS_Default)
DrawFiKeyPipeTee := TeeF([
    -L_Fi + ConRadius(ND_FiKeyPipe) + ShortTeeLength(ND_FiKeyPipe);
    W_Fi/2;
    N_FiLayer*H_FiLayer + ConRadius(ND_FiBwManBranch) + ConRadius(ND_FiTrunk) + ConRadius(ND_FiKeyPipe)
] + Fi_origin, [270; 0; 90]*deg, ND_FiKeyPipe, PS_Default)
DrawFiKeyPipeTop := PipeF([
    -L_Fi + ConRadius(ND_FiKeyPipe);
    W_Fi/2;
    N_FiLayer*H_FiLayer + ConRadius(ND_FiBwManBranch) + ConRadius(ND_FiTrunk) + ConRadius(ND_FiKeyPipe) + ShortTeeLength(ND_FiKeyPipe)
] + Fi_origin, H_Fi - (N_FiLayer*H_FiLayer + ConRadius(ND_FiBwManBranch) + ConRadius(ND_FiTrunk) + ConRadius(ND_FiKeyPipe) + ShortTeeLength(ND_FiKeyPipe)), [0; 90]*deg, ND_FiKeyPipe, PS_Default)
FreezeFiKeyPipe := FreezeLayer("FiKeypipePlu")
FiKeyPipeScript := stack(FiKeyPipeLayer, DrawFiKeyPipeCap, DrawFiKeyPipeBottom, DrawFiKeyPipeTee, DrawFiKeyPipeTop, FreezeFiKeyPipe)
