L_Stairs(H_Total) :=
    Ho_Stair ← 20 cm
    N_Stairs ← round(H_Total/Ho_Stair)
    H_Stair ← H_Total/N_Stairs
    W_Stair ← H_Stair
    L_Total ← (N_Stairs - 1)*W_Stair
    return L_Total
H_Stairs(L_Total) :=
    Wo_Stair ← 20 cm
    N_Stairs ← round(L_Total/Wo_Stair) + 1
    W_Stair ← L_Total/(N_Stairs - 1)
    H_Stair ← W_Stair
    H_Total ← N_Stairs*H_Stair
    return H_Total
W_Stair(H_Total) :=
    Ho_Stair ← 20 cm
    N_Stairs ← round(H_Total/Ho_Stair)
    H_Stair ← H_Total/N_Stairs
    W_Stair ← H_Stair
    return W_Stair
# Single stair width if width and height will be equal (general stair function below)
W_StairFixed(L_Total) :=
    Wo_Stair ← 20 cm
    N_Stairs ← round(L_Total/Wo_Stair) + 1
    W_Stair ← L_Total/(N_Stairs - 1)
    return W_Stair
# Single stair width if width independent of height based on fixed total length (fixed stair function below)
H_Stair(H_Total) :=
    Ho_Stair ← 20 cm
    N_Stairs ← round(H_Total/Ho_Stair)
    H_Stair ← H_Total/N_Stairs
    return H_Stair
# Single stair height if width and height will be equal (general stair function below)
H_StairFixed(L_Total, H_Total) :=
    Wo_Stair ← 20 cm
    N_Stairs ← round(L_Total/Wo_Stair) + 1
    H_Stair ← H_Total/N_Stairs
    return H_Stair
# Single stair height if width independent of height based on fixed total length (fixed stair function below)
StairsF(Stairs_Origin, W_Total, H_Total, Angle) :=
    Ho_Stair ← 20 cm
    N_Stairs ← round(H_Total/Ho_Stair)
    H_Stair ← H_Total/N_Stairs
    W_Stair ← H_Stair
    N_Points ← 2*N_Stairs + 2
    L_Total ← (N_Stairs - 1)*W_Stair
    PointMatrix[0] ← [Stairs_Origin[0]; Stairs_Origin[2]]
    for i ∈ 1 .. N_Points - 4
        PointMatrix[i] ← PointMatrix[i - 1] + [0 m; -H_Stair] if mod(i, 2) ≠ 0
        PointMatrix[i] ← PointMatrix[i - 1] + [W_Stair; 0 m] if mod(i, 2) == 0
    PointMatrix[N_Points - 3] ← PointMatrix[N_Points - 4] + [0 m; -H_Stair - T_PlantFloor]
    PointMatrix[N_Points - 2] ← PointMatrix[0] + [-W_Stair - T_PlantFloor*W_Stair/H_Stair; 0 m]
    PointMatrix[N_Points - 1] ← PointMatrix[0]
    PLineStairs ← Pline(PointMatrix)
    Zoom ← ZoomWindow([Stairs_Origin[0]; Stairs_Origin[2]] + [0 m; -H_Total], [Stairs_Origin[0]; Stairs_Origin[2]] + [L_Total; 0 m])
    Stairs_Extrude ← extrude([Stairs_Origin[0]; Stairs_Origin[2]], W_Total)
    MoveStairs ← Move([Stairs_Origin[0]; 0 m; Stairs_Origin[2]], [Stairs_Origin[0]; 0 m; Stairs_Origin[2]], [0 m; Stairs_Origin[1]; 0 m])
    RotateStairs ← Rotate3DLast(Stairs_Origin, "z", Angle)
    Final ←
        stack(view("f"), PLineStairs, Zoom, Stairs_Extrude, view("t"), MoveStairs) if Angle == 0
        stack(view("f"), PLineStairs, Zoom, Stairs_Extrude, view("t"), MoveStairs, RotateStairs) otherwise
    return Final  # error: This variable is undefined.
# Ho is the initial assumption for stairs height, equal to 20cm.
# Then, the real height of each step is H.Stairs
StairsFixedF(Stairs_Origin, W_Total, H_Total, L_Total, Angle) :=
    Wo_Stair ← 20 cm
    N_Stairs ← round(L_Total/Wo_Stair) + 1
    H_Stair ← H_Total/N_Stairs
    W_Stair ← L_Total/(N_Stairs - 1)
    N_Points ← 2*N_Stairs + 2
    PointMatrix[0] ← [Stairs_Origin[0]; Stairs_Origin[2]]
    for i ∈ 1 .. N_Points - 4
        PointMatrix[i] ← PointMatrix[i - 1] + [0 m; -H_Stair] if mod(i, 2) ≠ 0
        PointMatrix[i] ← PointMatrix[i - 1] + [W_Stair; 0 m] if mod(i, 2) == 0
    PointMatrix[N_Points - 3] ← PointMatrix[N_Points - 4] + [0 m; -H_Stair - T_PlantFloor]
    PointMatrix[N_Points - 2] ← PointMatrix[0] + [-W_Stair - T_PlantFloor*W_Stair/H_Stair; 0 m]
    PointMatrix[N_Points - 1] ← PointMatrix[0]
    PLineStairs ← Pline(PointMatrix)
    Zoom ← ZoomWindow([Stairs_Origin[0]; Stairs_Origin[2]] + [0 m; -H_Total], [Stairs_Origin[0]; Stairs_Origin[2]] + [L_Total; 0 m])
    Stairs_Extrude ← extrude([Stairs_Origin[0]; Stairs_Origin[2]], W_Total)
    MoveStairs ← Move([Stairs_Origin[0]; 0 m; Stairs_Origin[2]], [Stairs_Origin[0]; 0 m; Stairs_Origin[2]], [0 m; Stairs_Origin[1]; 0 m])
    RotateStairs ← Rotate3DLast(Stairs_Origin, "z", Angle)
    Final ←
        stack(view("f"), PLineStairs, Zoom, Stairs_Extrude, view("t"), MoveStairs) if Angle == 0
        stack(view("f"), PLineStairs, Zoom, Stairs_Extrude, view("t"), MoveStairs, RotateStairs) otherwise
    return Final  # error: This variable is undefined.
