# [reference: EtFlocSedFi.xmcd]
# Cylinderical Tank:
MakeOuterCylinderLayer := layer_new("OuterCylinder", grey)
R_OuterCylinder := 11.25 in
L_OuterCylinder := 24 in
X_OuterCylinder := 0 in
Y_OuterCylinder := 0 in
OuterCylinder_origin := [X_OuterCylinder; Y_OuterCylinder; L_OuterCylinder]
DrawOuterCylinder := CylinderF(OuterCylinder_origin, R_OuterCylinder, L_OuterCylinder, [180; 90]*deg)
FreezeOuterCylinderLayer := FreezeLayer("OuterCylinder")
R_InnerCylinder := 9.25 in
Inner_length := 22 in
X_InnerCylinder := 0 in
Y_InnerCylinder := 0 in
InnerCylinder_origin := [X_InnerCylinder; Y_InnerCylinder; L_OuterCylinder]
CreateInnerCylinder := CylinderF(InnerCylinder_origin, R_InnerCylinder, Inner_length, [180; 90]*deg)
SubtractInner := SubtractF(["OuterCylinder"], "DeleteMe")
DrawTank := stack(MakeOuterCylinderLayer, DrawOuterCylinder, FreezeOuterCylinderLayer, CreateInnerCylinder, GroupDelete, SubtractInner)
# [component: inputs DrawTank]
# Bottom Rotating Rod:
MakeBottomTeeLayer := layer_new("BottomTee", green)
X_BottomTee := 0 in
Y_BottomTee := 0 in
ND := 1.5 in
EN := PS_Default
Z_BottomTee := ShortTeeLength(ND) + outerdiameter(ND)/2 + R_OuterCylinder - R_InnerCylinder
BottomTee_origin := [X_BottomTee; Y_BottomTee; Z_BottomTee]
CreateBottomTee := TeeF(BottomTee_origin, [0; 90; 90]*deg, ND, EN)
FreezeBottomTeeLayer := FreezeLayer("BottomTee")
DrawBottomTee := stack(MakeBottomTeeLayer, CreateBottomTee, FreezeBottomTeeLayer)
# [component: inputs DrawBottomTee]
MakeStopperLayer := layer_new("Stopper", red)
L_Stopper := 2 in
X_Stopper := 0 in
Y_Stopper := R_InnerCylinder
R_Stopper := InnerDiameterFlex(ND)/2
Z_Stopper := R_OuterCylinder - R_InnerCylinder + R_Stopper
RightStopper_origin := [X_Stopper; Y_Stopper; Z_Stopper]
LeftStopper_origin := [X_Stopper; -Y_Stopper; Z_Stopper]
CreateRightStopper := CylinderF(RightStopper_origin, R_Stopper, L_Stopper, [90; 0]*deg)
CreateLeftStopper := CylinderF(LeftStopper_origin, R_Stopper, -L_Stopper, [90; 0]*deg)
FreezeStopperLayer := FreezeLayer("Stopper")
DrawStopper := stack(MakeStopperLayer, CreateRightStopper, CreateLeftStopper, FreezeStopperLayer)
# [component: inputs DrawStopper]
MakeBottomPipeLayer := layer_new("BottomPipe", blue)
L_BottomPipe := R_InnerCylinder - L_Stopper - SocketDepth(ND) - TeeLength(ND)/2
Y_RightPipe := R_InnerCylinder - L_Stopper
Y_LeftPipe := -(SocketDepth(ND) + (TeeLength(ND)/2))
Z_BottomPipe := InnerDiameterFlex(ND)/2 + R_OuterCylinder - R_InnerCylinder
X_BottomPipe := 0 in
RightPipe_origin := [X_BottomPipe; Y_RightPipe; Z_BottomPipe]
LeftPipe_origin := [X_BottomPipe; Y_LeftPipe; Z_BottomPipe]
DrawRightBottomPipe := PipeF(RightPipe_origin, L_BottomPipe, [90; 0]*deg, ND, EN)
DrawLeftBottomPipe := PipeF(LeftPipe_origin, L_BottomPipe, [90; 0]*deg, ND, EN)
FreezeBottomPipe := FreezeLayer("BottomPipe")
X_BottomInflowHole := outerdiameter(ND)/2
Z_BottomInflowHole := Z_BottomPipe
Y_RightBottomInflowHole := R_InnerCylinder - L_Stopper - 1.5 in
Y_LeftBottomInflowHole := -Y_RightBottomInflowHole
L_BottomInflowHole := 1 in
R_BottomInflowHole := .5 in
RightBottomInflowHole_origin := [X_BottomInflowHole; Y_RightBottomInflowHole; Z_BottomInflowHole]
LeftBottomInflowHole_origin := [X_BottomInflowHole; Y_LeftBottomInflowHole; Z_BottomInflowHole]
CreateRightBottomInflowHole := CylinderF(RightBottomInflowHole_origin, R_BottomInflowHole, L_BottomInflowHole, [0; 0]*deg)
CreateLeftBottomInflowHole := CylinderF(LeftBottomInflowHole_origin, R_BottomInflowHole, L_BottomInflowHole, [0; 0]*deg)
SubtractHoles := SubtractF(["BottomPipe"], "DeleteMe")
DrawBottomPipe := stack(MakeBottomPipeLayer, DrawRightBottomPipe, DrawLeftBottomPipe, FreezeBottomPipe, CreateRightBottomInflowHole, CreateLeftBottomInflowHole, GroupDelete, SubtractHoles)
# [component: inputs DrawBottomPipe]
# Lower Vertical Pipe:
MakeLowerVerticalPipeLayer := layer_new("LowerVerticalPipe", blue)
L_LowerVerticalPipe := 10 in
X_LowerVerticalPipe := 0 in
Y_LowerVerticalPipe := 0 in
Z_LowerVerticalPipe := Z_BottomTee + SocketDepth(ND)
LowerVerticalPipe_origin := [X_LowerVerticalPipe; Y_LowerVerticalPipe; Z_LowerVerticalPipe]
CreateLowerVerticalPipe := PipeF(LowerVerticalPipe_origin, L_LowerVerticalPipe, [0; 90]*deg, ND, EN)
FreezeLowerVerticalPipeLayer := FreezeLayer("LowerVerticalPipe")
DrawLowerVerticalPipe := stack(MakeLowerVerticalPipeLayer, CreateLowerVerticalPipe, FreezeLowerVerticalPipeLayer)
# [component: inputs DrawLowerVerticalPipe]
# Upper T Joint:
MakeUpperTeeLayer := layer_new("UpperTee", green)
X_UpperTee := 0 in
Y_UpperTee := ShortTeeLength(ND)
Z_UpperTee := Z_LowerVerticalPipe + L_LowerVerticalPipe + SocketDepth(ND) + TeeLength(ND)/2
UpperTee_origin := [X_UpperTee; Y_UpperTee; Z_UpperTee]
CreateUpperTee := TeeF(UpperTee_origin, [0; 90; 0]*deg, ND, EN)
FreezeUpperTeeLayer := FreezeLayer("UpperTee")
DrawUpperTee := stack(MakeUpperTeeLayer, CreateUpperTee, FreezeUpperTeeLayer)
# [component: inputs DrawUpperTee]
# Upper Horizontal Pipe:
MakeHorizontalPipeLayer := layer_new("HorizontalPipe", blue)
Z_HorizontalPipe := Z_UpperTee
L_HorizontalPipe := 3.5 in
X_HorizontalPipe := 0 in
Y_HorizontalPipe := L_HorizontalPipe + SocketDepth(ND) + ShortTeeLength(ND)
HorizontalPipe_origin := [X_HorizontalPipe; Y_HorizontalPipe; Z_HorizontalPipe]
CreateHorizontalPipe := PipeF(HorizontalPipe_origin, L_HorizontalPipe, [90; 0]*deg, ND, EN)
FreezeHorizontalPipeLayer := FreezeLayer("HorizontalPipe")
MakeEndCylinderLayer := layer_new("EndCylinder", red)
L_EndCylinder := .5 in
X_EndCylinder := X_HorizontalPipe
Y_EndCylinder := Y_HorizontalPipe + L_EndCylinder
Z_EndCylinder := Z_HorizontalPipe
R_EndCylinder := outerdiameter(ND)/2
EndCylinder_origin := [X_EndCylinder; Y_EndCylinder; Z_EndCylinder]
CreateEndCylinder := CylinderF(EndCylinder_origin, R_EndCylinder, L_EndCylinder, [90; 0]*deg)
FreezeEndCylinderLayer := FreezeLayer("EndCylinder")
Y_OutflowHole := Y_HorizontalPipe - 1 in
Z_OutflowHole := Z_HorizontalPipe
X_OutflowHole := InnerDiameterFlex(ND)/2
R_OutflowHole := .5 in
OutflowHole_origin := [X_OutflowHole; Y_OutflowHole; Z_OutflowHole]
OutflowHole := CylinderF(OutflowHole_origin, R_OutflowHole, 1 in, [0; 0]*deg)
SubtractHole := SubtractF(["HorizontalPipe"], "DeleteMe")
DrawHorizontalPipe := stack(MakeHorizontalPipeLayer, CreateHorizontalPipe, FreezeHorizontalPipeLayer, MakeEndCylinderLayer, CreateEndCylinder, FreezeEndCylinderLayer, OutflowHole, GroupDelete, SubtractHole)
# [component: inputs DrawHorizontalPipe]
# Upper Vertical Cylinder:
MakeUpperVerticalCylinderLayer := layer_new("UpperVerticalCylinder", red)
Z_UpperVerticalCylinder := TeeLength(ND)/2 + SocketDepth(ND) + Z_UpperTee
L_UpperVerticalCylinder := 5 in
X_UpperVerticalCylinder := 0 in
Y_UpperVerticalCylinder := Y_UpperTee - ShortTeeLength(ND)
UpperVerticalCylinder_origin := [X_UpperVerticalCylinder; Y_UpperVerticalCylinder; Z_UpperVerticalCylinder]
R_UpperVerticalCylinder := outerdiameter(ND)/2
CreateUpperVerticalCylinder := CylinderF(UpperVerticalCylinder_origin, R_UpperVerticalCylinder, L_UpperVerticalCylinder, [0; 90]*deg)
FreezeUpperVerticalCylinderLayer := FreezeLayer("UpperVerticalCylinder")
DrawUpperVerticalCylinder := stack(MakeUpperVerticalCylinderLayer, CreateUpperVerticalCylinder, FreezeUpperVerticalCylinderLayer)
# [component: inputs DrawUpperVerticalCylinder]
# Draw Middle Elbow:
MakeMiddleElbowLayer := layer_new("MiddleElbow", green)
X_MiddleElbow := 0 in
Y_MiddleElbow := Y_UpperVerticalCylinder
Z_MiddleElbow := L_UpperVerticalCylinder + SocketDepth(ND) + Z_UpperVerticalCylinder
MiddleElbow_origin := [X_MiddleElbow; Y_MiddleElbow; Z_MiddleElbow]
CreateMiddleElbow := ElbowF(MiddleElbow_origin, [0; 90; 90]*deg, ND, EN)
FreezeMiddleElbowLayer := FreezeLayer("MiddleElbow")
DrawMiddleElbow := stack(MakeMiddleElbowLayer, CreateMiddleElbow, FreezeMiddleElbowLayer)
# [component: inputs DrawMiddleElbow]
# Upper Horizontal Cylinder:
MakeUpperHorizontalCylinderLayer := layer_new("UpperHorizontalCylinder", red)
L_UpperHorizontalCylinder := 3.5 in
Z_UpperHorizontalCylinder := Z_MiddleElbow + ElbowRadius(ND)
X_UpperHorizontalCylinder := 0 in
Y_UpperHorizontalCylinder := Y_MiddleElbow - ElbowRadius(ND) - SocketDepth(ND)
R_UpperHorizontalCylinder := R_UpperVerticalCylinder
UpperHorizontalCylinder_origin := [X_UpperHorizontalCylinder; Y_UpperHorizontalCylinder; Z_UpperHorizontalCylinder]
CreateUpperHorizontalCylinder := CylinderF(UpperHorizontalCylinder_origin, R_UpperHorizontalCylinder, L_UpperHorizontalCylinder, [90; 0]*deg)
FreezeUpperHorizontalCylinderLayer := FreezeLayer("UpperHorizontalCylinder")
DrawUpperHorizontalCylinder := stack(MakeUpperHorizontalCylinderLayer, CreateUpperHorizontalCylinder, FreezeUpperHorizontalCylinderLayer)
# [component: inputs DrawUHC]
# Left Elbow:
MakeLeftElbowLayer := layer_new("LeftElbow", green)
X_LeftElbow := 0 in
Y_LeftElbow := Y_MiddleElbow - 2*ElbowRadius(ND) - L_UpperHorizontalCylinder - 2*SocketDepth(ND)
Z_LeftElbow := Z_UpperHorizontalCylinder + ElbowRadius(ND)
LeftElbow_origin := [X_LeftElbow; Y_LeftElbow; Z_LeftElbow]
CreateLeftElbow := ElbowF(LeftElbow_origin, [90; 90; 180]*deg, ND, EN)
FreezeLeftElbowLayer := FreezeLayer("LeftElbow")
DrawLeftElbow := stack(MakeLeftElbowLayer, CreateLeftElbow, FreezeLeftElbowLayer)
# [component: inputs DrawLeftElbow]
# Top Cylinder:
MakeTopCylinderLayer := layer_new("TopCylinder", red)
L_TopCylinder := 2.5 in
X_TopCylinder := 0 in
Y_TopCylinder := Y_LeftElbow
Z_TopCylinder := Z_LeftElbow + SocketDepth(ND)
TopCylinder_origin := [X_TopCylinder; Y_TopCylinder; Z_TopCylinder]
R_TopCylinder := outerdiameter(ND)/2
CreateTopCylinder := CylinderF(TopCylinder_origin, R_TopCylinder, L_TopCylinder, [0; 90]*deg)
FreezeTopCylinderLayer := FreezeLayer("TopCylinder")
DrawTopCylinder := stack(MakeTopCylinderLayer, CreateTopCylinder, FreezeTopCylinderLayer)
# [component: inputs DrawTopCylinder]
DrawStockTank := stack(DrawTank, DrawBottomTee, DrawStopper, DrawBottomPipe, DrawLowerVerticalPipe, DrawUpperTee, DrawHorizontalPipe, DrawUpperVerticalCylinder, DrawMiddleElbow, DrawUpperHorizontalCylinder, DrawLeftElbow, DrawTopCylinder)
# [component: inputs DrawStockTank]
