Teescript2(p1, p2, p3, p4, p5, p7, p8, p9, p10, p11, p12, ND, R1, R2, R3, L, H, win1, win2, EN) :=
    viewtop ← viewtop
    zoom_win ← zoom_wina(win1, win2)
    pipe1 ← Pipe(p1, ND, L, EN)
    pipe2 ← Pipe(p2, ND, L/2, EN)
    rotate1 ← rotate_3d(p3, p2, "y", 90)
    union1 ← unionA(p4, p5)
    cylinder1 ← cylinderC(p1, R2, L)
    subtract1 ← subtractA(p4, p3)
    cylinder5 ← cylinderC(p1, R3, -H)
    cylinder6 ← cylinderA(p1, R1, -H)
    subtract3 ← subtractA(p7, p8)
    viewfront ← viewfront
    mirror1 ← mirrorA(p9, p10, p11)
    mirror2 ← mirror(p9, p10, p12)
    bigunion1 ← union_allA
    one ← concat(viewtop, pipe1)
    two ← concat(pipe2)
    three ← concat(rotate1)
    four ← concat(union1, cylinder1)
    five ← concat(subtract1, cylinder5)
    six ← concat(cylinder6, viewtop, subtract3, viewfront1)
    seven ← concat(mirror1, mirror2)
    eight ← concat(bigunion1)
    return stack(one, two, three, four, five, six, seven, eight)  # error: This variable is undefined.
# p1 | p2 | p3 | p4 | p5 | p7 | p8 | p9 | p10 | p11 | p12
Tee2(origin, ND, R1, R2, R3, L, H, EN) := Teescript2([origin[0]; origin[1]; origin[2]], [origin[0]; origin[1]; origin[2] + L/2], [origin[0] + innerD(ND, EN)/2; origin[1]; origin[2] + L/2], [origin[0] - R1; origin[1]; origin[2]], [origin[0] + L/2; origin[1] + R1; origin[2] + L/2], [origin[0] - R3; origin[1]; origin[2]], [origin[0] - R1; origin[1]; origin[2]], [origin[0]; origin[2] - H; -origin[1] - R3], [origin[0]; origin[2] + L/2], [origin[0] + zc; origin[2] + L/2 - zc], [origin[0] + zc; origin[2] + L/2], ND, R1, R2, R3, L, H, [origin[0] - (L/2 + H); origin[1] - R3; origin[2]], [origin[0] + (L/2 + H); origin[1] + R3; origin[2]], EN)  # error: This variable is undefined.
Tee2(origin, ND, EN) := Tee2(origin, ND, outerradius(ND), innerD(ND, EN)/2, ConRadius(ND), ShortTeeLength(ND)*2, SocketDepth(ND), EN)  # error: This variable is undefined.
# New Tee Function
# The origin defines the inner side of the center of the socket on the short end of the tee. The default orientation has the long side oriented along the x-axis and the short end oriented along the positive y-axis.
TeeF(OriginPoint, AngleVector, ND, EN) :=
    ShortPipe ← PipeF(OriginPoint, ShortTeeLength(ND), [90; 0]*deg, ND, EN)
    LongPipe ← PipeF([OriginPoint[0] + ShortTeeLength(ND); OriginPoint[1] - ShortTeeLength(ND); OriginPoint[2]], TeeLength(ND), [0; 0]*deg, ND, EN)
    Zoom ← zoom_win([
        OriginPoint[0] - ShortTeeLength(ND) - SocketDepth(ND) - zc;
        OriginPoint[1] - ShortTeeLength(ND) - ConRadius(ND) - zc;
        OriginPoint[2] - ConRadius(ND) - zc
    ], [
        OriginPoint[0] + ShortTeeLength(ND) + SocketDepth(ND) + zc;
        OriginPoint[1] + SocketDepth(ND) + zc;
        OriginPoint[2] + ConRadius(ND) + zc
    ])
    RightSocketOuter ← cylinderD([OriginPoint[0] + ShortTeeLength(ND); OriginPoint[1] - ShortTeeLength(ND); OriginPoint[2]], ConRadius(ND), [
        OriginPoint[0] + ShortTeeLength(ND) + SocketDepth(ND);
        OriginPoint[1] - ShortTeeLength(ND);
        OriginPoint[2]
    ])
    RightSocketInner ← cylinderD([OriginPoint[0] + ShortTeeLength(ND) - zc; OriginPoint[1] - ShortTeeLength(ND); OriginPoint[2]], outerradius(ND), [
        OriginPoint[0] + ShortTeeLength(ND) + SocketDepth(ND) + zc;
        OriginPoint[1] - ShortTeeLength(ND);
        OriginPoint[2]
    ])
    SubtractRightSocket ← subtractD([
        OriginPoint[0] + ShortTeeLength(ND) + SocketDepth(ND);
        OriginPoint[1] - ShortTeeLength(ND) - ConRadius(ND);
        OriginPoint[2]
    ], [
        OriginPoint[0] + ShortTeeLength(ND) + SocketDepth(ND) + zc;
        OriginPoint[1] - ShortTeeLength(ND) - outerradius(ND) + SocketDepth(ND);
        OriginPoint[2]
    ])
    MirrorSocketAcross ← mirrorA([
        OriginPoint[0] + ShortTeeLength(ND);
        OriginPoint[1] - ShortTeeLength(ND) + SocketDepth(ND) - ConRadius(ND)
    ], [OriginPoint[0]; OriginPoint[1]], [OriginPoint[0]; OriginPoint[1] + zc])
    TopSocketOuter ← cylinderD(OriginPoint, ConRadius(ND), OriginPoint + [0 m; SocketDepth(ND); 0 m])
    TopSocketInner ← cylinderD(OriginPoint - [0 m; zc; 0 m], outerradius(ND), OriginPoint + [0 m; SocketDepth(ND) + zc; 0 m])
    SubtractTopSocket ← subtractD(OriginPoint + [ConRadius(ND); SocketDepth(ND); 0 m], OriginPoint + [outerradius(ND); SocketDepth(ND) + zc; 0 m])
    UnionPieces ← UnionMultiple([
        [OriginPoint[0] + outerradius(ND); OriginPoint[1] - 0.5*ShortTeeLength(ND); OriginPoint[2]];
        [OriginPoint[0] + ConRadius(ND); OriginPoint[1] + SocketDepth(ND); OriginPoint[2]];
        [
            OriginPoint[0] + 0.5*ShortTeeLength(ND);
            OriginPoint[1] - ShortTeeLength(ND) + outerradius(ND);
            OriginPoint[2]
        ];
        [
            OriginPoint[0] - ShortTeeLength(ND) - SocketDepth(ND);
            OriginPoint[1] - ShortTeeLength(ND) - ConRadius(ND);
            OriginPoint[2]
        ];
        [
            OriginPoint[0] + ShortTeeLength(ND) + SocketDepth(ND);
            OriginPoint[1] - ShortTeeLength(ND) + ConRadius(ND);
            OriginPoint[2]
        ]
    ])
    CylinderHoriz ← cylinderD([OriginPoint[0] + ShortTeeLength(ND) + zc; OriginPoint[1] - ShortTeeLength(ND); OriginPoint[2]], innerdiameter(ND, EN)/2, [OriginPoint[0] - ShortTeeLength(ND) - zc; OriginPoint[1] - ShortTeeLength(ND); OriginPoint[2]])
    SubtractHorizExcess ← subtractD([OriginPoint[0] + ConRadius(ND); OriginPoint[1] + SocketDepth(ND); OriginPoint[2]], [
        OriginPoint[0] + ShortTeeLength(ND) + zc;
        OriginPoint[1] - ShortTeeLength(ND) - innerdiameter(ND, EN)/2;
        OriginPoint[2]
    ])
    CylinderVert ← cylinderD([OriginPoint[0]; OriginPoint[1] + SocketDepth(ND) + zc; OriginPoint[2]], innerdiameter(ND, EN)/2, [OriginPoint[0]; OriginPoint[1] - ShortTeeLength(ND) - zc; OriginPoint[2]])
    SubtractVertExcess ← subtractD([OriginPoint[0] + ConRadius(ND); OriginPoint[1] + SocketDepth(ND); OriginPoint[2]], [OriginPoint[0] - innerdiameter(ND, EN)/2; OriginPoint[1] + SocketDepth(ND) + zc; OriginPoint[2]])
    Rotate ← [
        Rotate3DLast(OriginPoint, "z", AngleVector[0]);
        Rotate3DLast(OriginPoint, "y", AngleVector[1]);
        Rotate3DLast(OriginPoint, "x", AngleVector[2])
    ]
    Final ← stack(ShortPipe, LongPipe, Zoom, RightSocketOuter, RightSocketInner, SubtractRightSocket, concat(MirrorSocketAcross, TopSocketOuter), TopSocketInner, SubtractTopSocket, UnionPieces, CylinderHoriz, SubtractHorizExcess, CylinderVert, SubtractVertExcess)
    for i ∈ 0 .. 2
        Final ← stack(Final, Rotate[i]) if AngleVector[i] ≠ 0
    return Final  # error: This variable is undefined.
TeeSUBF(OriginPoint, AngleVector, ND, EN, SubtractionLayers) :=
    ShortPipe ← PipeF(OriginPoint, ShortTeeLength(ND), [90; 0]*deg, ND, EN)
    LongPipe ← PipeF([OriginPoint[0] + ShortTeeLength(ND); OriginPoint[1] - ShortTeeLength(ND); OriginPoint[2]], TeeLength(ND), [0; 0]*deg, ND, EN)
    Zoom ← zoom_win([
        OriginPoint[0] - ShortTeeLength(ND) - SocketDepth(ND) - zc;
        OriginPoint[1] - ShortTeeLength(ND) - ConRadius(ND) - zc;
        OriginPoint[2] - ConRadius(ND) - zc
    ], [
        OriginPoint[0] + ShortTeeLength(ND) + SocketDepth(ND) + zc;
        OriginPoint[1] + SocketDepth(ND) + zc;
        OriginPoint[2] + ConRadius(ND) + zc
    ])
    RightSocketOuter ← cylinderD([OriginPoint[0] + ShortTeeLength(ND); OriginPoint[1] - ShortTeeLength(ND); OriginPoint[2]], ConRadius(ND), [
        OriginPoint[0] + ShortTeeLength(ND) + SocketDepth(ND);
        OriginPoint[1] - ShortTeeLength(ND);
        OriginPoint[2]
    ])
    MirrorSocketAcross ← mirrorA([
        OriginPoint[0] + ShortTeeLength(ND);
        OriginPoint[1] - ShortTeeLength(ND) + SocketDepth(ND) - ConRadius(ND)
    ], [OriginPoint[0]; OriginPoint[1]], [OriginPoint[0]; OriginPoint[1] + zc])
    TopSocketOuter ← cylinderD(OriginPoint, ConRadius(ND), OriginPoint + [0 m; SocketDepth(ND); 0 m])
    UnionPieces ← UnionMultiple([
        [OriginPoint[0] + outerradius(ND); OriginPoint[1] - 0.5*ShortTeeLength(ND); OriginPoint[2]];
        [OriginPoint[0] + ConRadius(ND); OriginPoint[1] + SocketDepth(ND); OriginPoint[2]];
        [
            OriginPoint[0] + 0.5*ShortTeeLength(ND);
            OriginPoint[1] - ShortTeeLength(ND) + outerradius(ND);
            OriginPoint[2]
        ];
        [
            OriginPoint[0] - ShortTeeLength(ND) - SocketDepth(ND);
            OriginPoint[1] - ShortTeeLength(ND) - ConRadius(ND);
            OriginPoint[2]
        ];
        [
            OriginPoint[0] + ShortTeeLength(ND) + SocketDepth(ND);
            OriginPoint[1] - ShortTeeLength(ND) + ConRadius(ND);
            OriginPoint[2]
        ]
    ])
    Rotate ← [
        Rotate3DLast(OriginPoint, "z", AngleVector[0]);
        Rotate3DLast(OriginPoint, "y", AngleVector[1]);
        Rotate3DLast(OriginPoint, "x", AngleVector[2])
    ]
    Final ← stack(ShortPipe, LongPipe, Zoom, RightSocketOuter, concat(MirrorSocketAcross, TopSocketOuter), UnionPieces)
    for i ∈ 0 .. 2
        Final ← stack(Final, Rotate[i]) if AngleVector[i] ≠ 0
    Group ← GroupAll("DeleteMe")
    Subtract ← SubtractF(SubtractionLayers, "DeleteMe")
    RightSocketInner ← cylinderD([OriginPoint[0] + ShortTeeLength(ND) - zc; OriginPoint[1] - ShortTeeLength(ND); OriginPoint[2]], outerradius(ND), [
        OriginPoint[0] + ShortTeeLength(ND) + SocketDepth(ND) + zc;
        OriginPoint[1] - ShortTeeLength(ND);
        OriginPoint[2]
    ])
    SubtractRightSocket ← subtractD([
        OriginPoint[0] + ShortTeeLength(ND) + SocketDepth(ND);
        OriginPoint[1] - ShortTeeLength(ND) - ConRadius(ND);
        OriginPoint[2]
    ], [
        OriginPoint[0] + ShortTeeLength(ND) + SocketDepth(ND) + zc;
        OriginPoint[1] - ShortTeeLength(ND) - outerradius(ND) + SocketDepth(ND);
        OriginPoint[2]
    ])
    TopSocketInner ← cylinderD(OriginPoint - [0 m; zc; 0 m], outerradius(ND), OriginPoint + [0 m; SocketDepth(ND) + zc; 0 m])
    SubtractTopSocket ← subtractD(OriginPoint + [ConRadius(ND); SocketDepth(ND); 0 m], OriginPoint + [outerradius(ND); SocketDepth(ND) + zc; 0 m])
    CylinderHoriz ← cylinderD([OriginPoint[0] + ShortTeeLength(ND) + zc; OriginPoint[1] - ShortTeeLength(ND); OriginPoint[2]], innerdiameter(ND, EN)/2, [OriginPoint[0] - ShortTeeLength(ND) - zc; OriginPoint[1] - ShortTeeLength(ND); OriginPoint[2]])
    SubtractHorizExcess ← subtractD([OriginPoint[0] + ConRadius(ND); OriginPoint[1] + SocketDepth(ND); OriginPoint[2]], [
        OriginPoint[0] + ShortTeeLength(ND) + zc;
        OriginPoint[1] - ShortTeeLength(ND) - innerdiameter(ND, EN)/2;
        OriginPoint[2]
    ])
    CylinderVert ← cylinderD([OriginPoint[0]; OriginPoint[1] + SocketDepth(ND) + zc; OriginPoint[2]], innerdiameter(ND, EN)/2, [OriginPoint[0]; OriginPoint[1] - ShortTeeLength(ND) - zc; OriginPoint[2]])
    SubtractVertExcess ← subtractD([OriginPoint[0] + ConRadius(ND); OriginPoint[1] + SocketDepth(ND); OriginPoint[2]], [OriginPoint[0] - innerdiameter(ND, EN)/2; OriginPoint[1] + SocketDepth(ND) + zc; OriginPoint[2]])
    Draw ← stack(Group, Subtract, ShortPipe, LongPipe, Zoom, RightSocketOuter, RightSocketInner, SubtractRightSocket, concat(MirrorSocketAcross, TopSocketOuter), TopSocketInner, SubtractTopSocket, UnionPieces, CylinderHoriz, SubtractHorizExcess, CylinderVert, SubtractVertExcess)
    for i ∈ 0 .. 2
        Draw ← stack(Final, Rotate[i]) if AngleVector[i] ≠ 0
    return Draw  # error: This variable is undefined.
