# [reference: MasterProgram.xmcd]
# [reference: floctank.xmcd]
# [reference: SedTank- with pieces.xmcd]
ASSUMPTIONS
S_Walkway := 50 cm  # Distance from the border of the wall
H_Walkway := 30 cm  # Thickness of the walkway
W_Walkway := 1.5 m
# ORIGIN POINTS
Walkway_Origin := [Plant_Origin[0] - T_PlantWall - L_Sed; Plant_Origin[1]; W_Sed - S_Walkway]
# DIMENSION POINTS
Walkway_Dimensions := [
    -W_Walkway;
    (W_FlocChannel*N_FlocChannels) + (T_PlantWall*N_FlocChannels) + N_SedTanks*(W_Sed + (N_SedBays*T_PlantWall));
    H_Walkway
]
Drainboxes_Dimensions := [-2*D_SedDrainValve; 2*D_SedDrainValve; H_Walkway]
FlocDrainboxes_Dimensions := [-2*D_FlocValve; 2*D_FlocValve; H_Walkway]
# WALKWAY SCRIPT
Walkway_Script :=
    WalkwayLayer ← layer_new("Walkway", grey)
    WalkwayBox ← BoxF(Walkway_Origin, Walkway_Origin + Walkway_Dimensions, [0; 0; 0]*deg)
    FreezeWalkwayBox ← FreezeLayer("Walkway")
    for i ∈ 0 .. N_SedBays - 1
        DrainBoxes ← stack(DrainBoxes, BoxF([Plant_Origin[0] - T_PlantWall - L_Sed; W_SedBay*(N_SedBays - i) - 0.5*W_SedBay; W_Sed - S_Walkway], [Plant_Origin[0] - T_PlantWall - L_Sed; W_SedBay*(N_SedBays - i) - 0.5*W_SedBay; W_Sed - S_Walkway] + Drainboxes_Dimensions, [0; 0; 0]*deg))
    SedDrainBoxes ← array_all(N_SedBays, 1, W_SedBay*N_SedBays)
    for j ∈ 0 .. last(Y_FlocDrainValves)
        FlocDrainBoxes ← stack(FlocDrainBoxes, BoxF([Plant_Origin[0] - T_PlantWall - L_Sed; Y_FlocDrainValves[j]; W_Sed - S_Walkway], [Plant_Origin[0] - T_PlantWall - L_Sed; Y_FlocDrainValves[j]; W_Sed - S_Walkway] + FlocDrainboxes_Dimensions, [0; 0; 0]*deg))
    Group ← GroupAll("DeleteMe")
    Subtract ← SubtractF(["Walkway"], "DeleteMe")
    return stack(WalkwayLayer, WalkwayBox, DrainBoxes, FreezeWalkwayBox, DrainBoxes, SedDrainBoxes, FlocDrainBoxes, Group, Subtract)
AC_OperatorAcces := Walkway_Script
W_SedBay*N_SedBays + N_SedBays*T_PlantWall
# [component: inputs stack(Walkway_Script)]
