# platform origin=bottom nw corner
Stock1_script(platform_origin, column1_origin, column2_origin, column3_origin, column4_origin, barrel1_origin, barrel2_origin, platform_dim, column_dim, R, H_barrel) :=
    layer1 ← layer_new("chplatform", grey)
    box1 ← box(platform_origin, [
        platform_origin[0] - platform_dim[0];
        platform_origin[1] - platform_dim[1];
        platform_origin[2] + platform_dim[2]
    ])
    box2 ← box(column1_origin, [
        column1_origin[0] + column_dim[0];
        column1_origin[1] - column_dim[1];
        column1_origin[2] - column_dim[2]
    ])
    box3 ← box(column2_origin, [
        column2_origin[0] - column_dim[0];
        column2_origin[1] - column_dim[1];
        column2_origin[2] - column_dim[2]
    ])
    box4 ← box(column3_origin, [
        column3_origin[0] + column_dim[0];
        column3_origin[1] + column_dim[1];
        column3_origin[2] - column_dim[2]
    ])
    box5 ← box(column4_origin, [
        column4_origin[0] - column_dim[0];
        column4_origin[1] + column_dim[1];
        column4_origin[2] - column_dim[2]
    ])
    union1 ← union_allA
    layer2 ← layer_new("chbarrel", blue2)
    cylinder1 ← cylinderC(barrel1_origin, R, H_barrel)
    cylinder2 ← cylinderC(barrel2_origin, R, H_barrel)
    layerset ← layer_set("0")
    layerfreeze1 ← layer_freeze("chplatform")
    layerfreeze2 ← layer_freeze("chbarrel")
    one ← stack(layer1, box1, box2, box3, box4, box5, zoomA, union1, layerset, layer2, cylinder1, cylinder2, layerset, layerfreeze1, layerfreeze2)
    return ← one  # error: This variable is undefined.
# platform1_dim | platform2_dim
Stock1(platform_origin, platform_dim, column_dim, R, H_barrel) := Stock1_script(platform_origin, [platform_origin[0] - platform_dim[0]; platform_origin[1]; platform_origin[2]], platform_origin, [platform_origin[0] - platform_dim[0]; platform_origin[1] - platform_dim[1]; platform_origin[2]], [platform_origin[0]; platform_origin[1] - platform_dim[1]; platform_origin[2]], [
    platform_origin[0] - platform_dim[0]/4;
    platform_origin[1] - platform_dim[1]/2;
    platform_origin[2] + platform_dim[2]
], [
    platform_origin[0] - (3*platform_dim)[0]/4;
    platform_origin[1] - platform_dim[1]/2;
    platform_origin[2] + platform_dim[2]
], platform_dim, column_dim, R, H_barrel)  # error: This variable is undefined.
Stock(origin, disp, thick, walkway, column_dim, R, H) := Stock1(origin, [(2*(2*R)) + (3*disp); (2*R) + walkway + disp; thick], column_dim, R, H)  # error: This variable is undefined.
Stock([0; 0; 0]*m, .1 m, .1 m, 1 ft, [.1; .1; 1]*m, 1.5 ft, 1 m)
