# Reference Master Program
# [reference: MasterProgram.xmcd]
couplingscript(o, outerradiusocket, outerradius, innerradiussocket, innerradius, L_pipe, L_socket) :=
    zoom ← zoom_win([o[0] - outerradiusocket; o[1] + outerradiusocket; o[2]], [o[0] + outerradiusocket; o[1] - outerradiusocket; o[2]])
    cylinder3a ← cylinderC([o[0]; o[1]; o[2]], outerradiusocket, -L_socket)
    cylinder4a ← cylinderC([o[0]; o[1]; o[2] + zc], innerradiussocket, -L_socket - 2*zc)
    subtract2a ← subtractD([o[0] - outerradiusocket; o[1]; o[2]], [o[0] - innerradiussocket; o[1]; o[2] + zc])
    cylinder3b ← cylinderC([o[0]; o[1]; o[2] - L_pipe - L_socket], outerradiusocket, -L_socket)
    cylinder4b ← cylinderC([o[0]; o[1]; o[2] - L_pipe - L_socket + zc], innerradiussocket, -L_socket - 2*zc)
    subtract2b ← subtractD([o[0] - outerradiusocket; o[1]; o[2] - L_pipe - L_socket], [o[0] - innerradiussocket; o[1]; o[2] - L_pipe - L_socket])
    cylinder1 ← cylinderC([o[0]; o[1]; o[2] - L_socket], outerradius, -L_pipe)
    cylinder2 ← cylinderC([o[0]; o[1]; o[2] - L_socket + zc], innerradius, -L_pipe - 2*zc)
    subtract1 ← subtractD([o[0] - outerradius; o[1]; o[2] - L_socket], [o[0] - innerradius; o[1]; o[2] - L_socket])
    union1 ← union_all
    one ← stack(zoom, cylinder3a, cylinder4a, subtract2a, cylinder3b, cylinder4b, subtract2b, cylinder1, cylinder2, subtract1, union1)
    return one
# Draw outside of pipe
# Draw outside of socket
# Draw inside of socket
# Subtract inner socket from outer socket
# Draw inner pipe
# If the size of the coupling is determined by the inner diameter of the pipe:
# Subtract inner pipe from outer pipe
couplingIDpipe(o, ID_pipe, L, EN) := couplingscript([o[0]; o[1]; o[2]], ConRadius(NominalDiameter(ID_pipe, EN)), outerradius(NominalDiameter(ID_pipe, EN)), outerradius(NominalDiameter(ID_pipe, EN)), innerD(ID_pipe, EN)/2, L - 2*SocketDepth(ID_pipe), SocketDepth(ID_pipe))
# If the size of the coupling is determined by the inner diameter of the socket (the outer diameter of the pipe fitting into the socket):
# Pipesizes matrix with columns switched so that the Nominal Pipe Size can be called with a given Outer Diameter.
Pipesizescoupling := [
    .405 in, 1/8*in;
    .540 in, 1/4*in;
    .675 in, 3/8*in;
    .840 in, 1/2*in;
    1.050 in, 3/4*in;
    1.315 in, 1 in;
    1.66 in, 1.25 in;
    1.9 in, 1.5 in;
    2.375 in, 2 in;
    2.875 in, 2.5 in;
    3.5 in, 3 in;
    4 in, 3.5 in;
    4.5 in, 4 in;
    5.563 in, 5 in;
    6.625 in, 6 in;
    8.625 in, 8 in;
    10.75 in, 10 in;
    12.75 in, 12 in;
    14 in, 14 in;
    16 in, 16 in;
    18 in, 18 in;
    20 in, 20 in;
    24 in, 24 in
]
Pipesizes := [
    1/8*in, .405 in;
    1/4*in, .540 in;
    3/8*in, .675 in;
    1/2*in, .840 in;
    3/4*in, 1.050 in;
    1 in, 1.315 in;
    1.25 in, 1.66 in;
    1.5 in, 1.9 in;
    2 in, 2.375 in;
    2.5 in, 2.875 in;
    3 in, 3.5 in;
    3.5 in, 4 in;
    4 in, 4.5 in;
    5 in, 5.563 in;
    6 in, 6.625 in;
    8 in, 8.625 in;
    10 in, 10.75 in;
    12 in, 12.75 in;
    14 in, 14 in;
    16 in, 16 in;
    18 in, 18 in;
    20 in, 20 in;
    24 in, 24 in
]
couplingIDsocket(o, ID_socket, L_Coupling, EN) := couplingscript([o[0]; o[1]; o[2]], ConRadius(vlookup(ID_socket, Pipesizescoupling, 1)[0]), outerradius(vlookup(ID_socket, Pipesizescoupling, 1)[0]), outerradius(vlookup(ID_socket, Pipesizescoupling, 1)[0]), innerR(vlookup(ID_socket, Pipesizescoupling, 1)[0], EN), L_Coupling - 2*SocketDepth(vlookup(ID_socket, Pipesizescoupling, 1)[0]), SocketDepth(vlookup(ID_socket, Pipesizescoupling, 1)[0]))
coupling := couplingIDsocket([0; 0; 0], 4.5 in, 9 in, 4)
# [component: inputs coupling]
