Crossscript1(p1, p17, p18, p19, p20, p21, p22, p23, p24, ND, R1, R2, R3, L, H, win1, win2, EN) :=
    Tee1 ← Tee(p1, ND, EN)
    mirror3 ← mirrorA(p17, p18, p19)
    cylinder7 ← cylinderB(p20, R2, p21)
    subtract4 ← SubtractGeneral([p22; p23], [p24])
    viewfront2 ← concat("_-view", sp, "o", sp, "f")
    one ← concat(zoom, mirror3, viewtop1)
    two ← concat(cylinder7, subtract4, viewfront1)
    return stack(Tee1, one, two)  # error: This variable is undefined.
# p1 | p17 | p18 | p19 | p20 | p21 | p22 | p23 | p24
Cross1(origin, ND, R1, R2, R3, L, H, EN) := Crossscript1([origin[0]; origin[1]; origin[2]], [origin[0]; origin[2] + R2; origin[1]], [origin[0]; origin[2]], [origin[0]; origin[2] + zc], [origin[0] - L/2; origin[1]; origin[2] + L/2], [origin[0] + L/2; origin[1]; origin[2] + L/2], [origin[0] - L/4; origin[1] - R1; origin[2]], [origin[0] + L/4; origin[1] - R1; origin[2]], [origin[0]; origin[1]; origin[2] + L/2 - R3], ND, R1, R2, R3, L, H, [origin[0] - (L/2 + H); origin[1] - R3; origin[2]], [origin[0] + (L/2 + H); origin[1] + R3; origin[2]], EN)  # error: This variable is undefined.
Cross(origin, ND, EN) := Cross1(origin, ND, outerradius(ND), innerD(ND, EN)/2, ConRadius(ND), ShortTeeLength(ND)*2, SocketDepth(ND), EN)  # error: This variable is undefined.
# New Cross Function
# The default orientation of the cross has its plane of symmetry in the xy-plane, with its arms along the x and y axes. The origin defines the inside of the socket lying along the positive y-axis.
CrossF(OriginPoint, AngleVector, ND, EN) :=
    VertPipe ← PipeF(OriginPoint, TeeLength(ND), [90; 0]*deg, ND, EN)
    HorizPipe ← PipeF([OriginPoint[0] + ShortTeeLength(ND); OriginPoint[1] - ShortTeeLength(ND); OriginPoint[2]], TeeLength(ND), [0; 0]*deg, ND, EN)
    Zoom ← zoom_win([
        OriginPoint[0] - ShortTeeLength(ND) - SocketDepth(ND) - zc;
        OriginPoint[1] - TeeLength(ND) - SocketDepth(ND) - zc;
        OriginPoint[2] - ConRadius(ND) - zc
    ], [
        OriginPoint[0] + ShortTeeLength(ND) + SocketDepth(ND) + zc;
        OriginPoint[1] + SocketDepth(ND) + zc;
        OriginPoint[2] + ConRadius(ND) + zc
    ])
    RightSocketOuter ← cylinderD([OriginPoint[0] + ShortTeeLength(ND); OriginPoint[1] - ShortTeeLength(ND); OriginPoint[2]], ConRadius(ND), [
        OriginPoint[0] + ShortTeeLength(ND) + SocketDepth(ND);
        OriginPoint[1] - ShortTeeLength(ND);
        OriginPoint[2]
    ])
    RightSocketInner ← cylinderD([OriginPoint[0] + ShortTeeLength(ND) - zc; OriginPoint[1] - ShortTeeLength(ND); OriginPoint[2]], outerradius(ND), [
        OriginPoint[0] + ShortTeeLength(ND) + SocketDepth(ND) + zc;
        OriginPoint[1] - ShortTeeLength(ND);
        OriginPoint[2]
    ])
    SubtractRightSocket ← SubtractGeneral([[
        OriginPoint[0] + ShortTeeLength(ND) + SocketDepth(ND);
        OriginPoint[1] - ShortTeeLength(ND) - ConRadius(ND);
        OriginPoint[2]
    ]], [[
        OriginPoint[0] + ShortTeeLength(ND) + SocketDepth(ND) + zc;
        OriginPoint[1] - ShortTeeLength(ND) - outerradius(ND) + SocketDepth(ND);
        OriginPoint[2]
    ]])
    MirrorSocketAcross ← mirrorA([
        OriginPoint[0] + ShortTeeLength(ND);
        OriginPoint[1] - ShortTeeLength(ND) + SocketDepth(ND) - ConRadius(ND)
    ], [OriginPoint[0]; OriginPoint[1]], [OriginPoint[0]; OriginPoint[1] + zc])
    MirrorSocketUp ← mirrorA([
        OriginPoint[0] + ShortTeeLength(ND);
        OriginPoint[1] - ShortTeeLength(ND) + SocketDepth(ND) - ConRadius(ND)
    ], [OriginPoint[0]; OriginPoint[1] - ShortTeeLength(ND)], [OriginPoint[0] + zc; OriginPoint[1] - ShortTeeLength(ND) + zc])
    MirrorSocketDown ← mirror([
        OriginPoint[0] + ShortTeeLength(ND);
        OriginPoint[1] - ShortTeeLength(ND) + SocketDepth(ND) - ConRadius(ND)
    ], [OriginPoint[0]; OriginPoint[1] - ShortTeeLength(ND)], [OriginPoint[0] + zc; OriginPoint[1] - ShortTeeLength(ND) - zc])
    UnionPieces ← UnionMultiple([
        [OriginPoint[0] + ConRadius(ND); OriginPoint[1] - TeeLength(ND) - SocketDepth(ND); OriginPoint[2]];
        [OriginPoint[0] + outerradius(ND); OriginPoint[1] - 0.5*ShortTeeLength(ND); OriginPoint[2]];
        [OriginPoint[0] + ConRadius(ND); OriginPoint[1] + SocketDepth(ND); OriginPoint[2]];
        [
            OriginPoint[0] + 0.5*ShortTeeLength(ND);
            OriginPoint[1] - ShortTeeLength(ND) + outerradius(ND);
            OriginPoint[2]
        ];
        [
            OriginPoint[0] - ShortTeeLength(ND) - SocketDepth(ND);
            OriginPoint[1] - ShortTeeLength(ND) - ConRadius(ND);
            OriginPoint[2]
        ];
        [
            OriginPoint[0] + ShortTeeLength(ND) + SocketDepth(ND);
            OriginPoint[1] - ShortTeeLength(ND) + ConRadius(ND);
            OriginPoint[2]
        ]
    ])
    CylinderHoriz ← cylinderD([OriginPoint[0] + ShortTeeLength(ND) + zc; OriginPoint[1] - ShortTeeLength(ND); OriginPoint[2]], innerdiameter(ND, EN)/2, [OriginPoint[0] - ShortTeeLength(ND) - zc; OriginPoint[1] - ShortTeeLength(ND); OriginPoint[2]])
    SubtractHorizExcess ← SubtractGeneral([[OriginPoint[0] + ConRadius(ND); OriginPoint[1] + SocketDepth(ND); OriginPoint[2]]], [[
        OriginPoint[0] + ShortTeeLength(ND) + zc;
        OriginPoint[1] - ShortTeeLength(ND) - innerdiameter(ND, EN)/2;
        OriginPoint[2]
    ]])
    CylinderVert ← cylinderD([OriginPoint[0]; OriginPoint[1] + SocketDepth(ND) + zc; OriginPoint[2]], innerdiameter(ND, EN)/2, [OriginPoint[0]; OriginPoint[1] - SocketDepth(ND) - TeeLength(ND) - zc; OriginPoint[2]])
    SubtractVertExcess ← SubtractGeneral([[OriginPoint[0] + ConRadius(ND); OriginPoint[1] + SocketDepth(ND); OriginPoint[2]]], [[OriginPoint[0] - innerdiameter(ND, EN)/2; OriginPoint[1] + SocketDepth(ND) + zc; OriginPoint[2]]])
    Rotate ← [
        Rotate3DLast(OriginPoint, "z", AngleVector[0]);
        Rotate3DLast(OriginPoint, "y", AngleVector[1]);
        Rotate3DLast(OriginPoint, "x", AngleVector[2])
    ]
    Final ← stack(VertPipe, HorizPipe, Zoom, RightSocketOuter, RightSocketInner, SubtractRightSocket, concat(MirrorSocketAcross, MirrorSocketUp, MirrorSocketDown), UnionPieces, CylinderHoriz, SubtractHorizExcess, CylinderVert, SubtractVertExcess)
    for i ∈ 0 .. 2
        Final ← stack(Final, Rotate[i]) if AngleVector[i] ≠ 0
    return Final  # error: This variable is undefined.
CrossSUBF :=
    VertPipe ← PipeF(OriginPoint, TeeLength(ND), [90; 0]*deg, ND, EN)
    HorizPipe ← PipeF([OriginPoint[0] + ShortTeeLength(ND); OriginPoint[1] - ShortTeeLength(ND); OriginPoint[2]], TeeLength(ND), [0; 0]*deg, ND, EN)
    Zoom ← zoom_win([
        OriginPoint[0] - ShortTeeLength(ND) - SocketDepth(ND) - zc;
        OriginPoint[1] - TeeLength(ND) - SocketDepth(ND) - zc;
        OriginPoint[2] - ConRadius(ND) - zc
    ], [
        OriginPoint[0] + ShortTeeLength(ND) + SocketDepth(ND) + zc;
        OriginPoint[1] + SocketDepth(ND) + zc;
        OriginPoint[2] + ConRadius(ND) + zc
    ])
    RightSocketOuter ← cylinderD([OriginPoint[0] + ShortTeeLength(ND); OriginPoint[1] - ShortTeeLength(ND); OriginPoint[2]], ConRadius(ND), [
        OriginPoint[0] + ShortTeeLength(ND) + SocketDepth(ND);
        OriginPoint[1] - ShortTeeLength(ND);
        OriginPoint[2]
    ])
    MirrorSocketAcross ← mirrorA([
        OriginPoint[0] + ShortTeeLength(ND);
        OriginPoint[1] - ShortTeeLength(ND) + SocketDepth(ND) - ConRadius(ND)
    ], [OriginPoint[0]; OriginPoint[1]], [OriginPoint[0]; OriginPoint[1] + zc])
    MirrorSocketUp ← mirrorA([
        OriginPoint[0] + ShortTeeLength(ND);
        OriginPoint[1] - ShortTeeLength(ND) + SocketDepth(ND) - ConRadius(ND)
    ], [OriginPoint[0]; OriginPoint[1] - ShortTeeLength(ND)], [OriginPoint[0] + zc; OriginPoint[1] - ShortTeeLength(ND) + zc])
    MirrorSocketDown ← mirror([
        OriginPoint[0] + ShortTeeLength(ND);
        OriginPoint[1] - ShortTeeLength(ND) + SocketDepth(ND) - ConRadius(ND)
    ], [OriginPoint[0]; OriginPoint[1] - ShortTeeLength(ND)], [OriginPoint[0] + zc; OriginPoint[1] - ShortTeeLength(ND) - zc])
    UnionPieces ← UnionMultiple([
        [OriginPoint[0] + ConRadius(ND); OriginPoint[1] - TeeLength(ND) - SocketDepth(ND); OriginPoint[2]];
        [OriginPoint[0] + outerradius(ND); OriginPoint[1] - 0.5*ShortTeeLength(ND); OriginPoint[2]];
        [OriginPoint[0] + ConRadius(ND); OriginPoint[1] + SocketDepth(ND); OriginPoint[2]];
        [
            OriginPoint[0] + 0.5*ShortTeeLength(ND);
            OriginPoint[1] - ShortTeeLength(ND) + outerradius(ND);
            OriginPoint[2]
        ];
        [
            OriginPoint[0] - ShortTeeLength(ND) - SocketDepth(ND);
            OriginPoint[1] - ShortTeeLength(ND) - ConRadius(ND);
            OriginPoint[2]
        ];
        [
            OriginPoint[0] + ShortTeeLength(ND) + SocketDepth(ND);
            OriginPoint[1] - ShortTeeLength(ND) + ConRadius(ND);
            OriginPoint[2]
        ]
    ])
    Rotate ← [
        Rotate3DLast(OriginPoint, "z", AngleVector[0]);
        Rotate3DLast(OriginPoint, "y", AngleVector[1]);
        Rotate3DLast(OriginPoint, "x", AngleVector[2])
    ]
    Final ← stack(VertPipe, HorizPipe, Zoom, RightSocketOuter, concat(MirrorSocketAcross, MirrorSocketUp, MirrorSocketDown), UnionPieces)
    for i ∈ 0 .. 2
        Final ← stack(Final, Rotate[i]) if AngleVector[i]
    Group ← GroupLast("DeleteMe")
    Local ← stack(Final, Group, SubtractF(SubtractionLayers, "DeleteMe"))
    RightSocketInner ← cylinderD([OriginPoint[0] + ShortTeeLength(ND) - zc; OriginPoint[1] - ShortTeeLength(ND); OriginPoint[2]], outerradius(ND), [
        OriginPoint[0] + ShortTeeLength(ND) + SocketDepth(ND) + zc;
        OriginPoint[1] - ShortTeeLength(ND);
        OriginPoint[2]
    ])
    SubtractRightSocket ← SubtractGeneral([[
        OriginPoint[0] + ShortTeeLength(ND) + SocketDepth(ND);
        OriginPoint[1] - ShortTeeLength(ND) - ConRadius(ND);
        OriginPoint[2]
    ]], [[
        OriginPoint[0] + ShortTeeLength(ND) + SocketDepth(ND) + zc;
        OriginPoint[1] - ShortTeeLength(ND) - outerradius(ND) + SocketDepth(ND);
        OriginPoint[2]
    ]])
    CylinderHoriz ← cylinderD([OriginPoint[0] + ShortTeeLength(ND) + zc; OriginPoint[1] - ShortTeeLength(ND); OriginPoint[2]], innerdiameter(ND, EN)/2, [OriginPoint[0] - ShortTeeLength(ND) - zc; OriginPoint[1] - ShortTeeLength(ND); OriginPoint[2]])
    SubtractHorizExcess ← SubtractGeneral([[OriginPoint[0] + ConRadius(ND); OriginPoint[1] + SocketDepth(ND); OriginPoint[2]]], [[
        OriginPoint[0] + ShortTeeLength(ND) + zc;
        OriginPoint[1] - ShortTeeLength(ND) - innerdiameter(ND, EN)/2;
        OriginPoint[2]
    ]])
    CylinderVert ← cylinderD([OriginPoint[0]; OriginPoint[1] + SocketDepth(ND) + zc; OriginPoint[2]], innerdiameter(ND, EN)/2, [OriginPoint[0]; OriginPoint[1] - SocketDepth(ND) - TeeLength(ND) - zc; OriginPoint[2]])
    SubtractVertExcess ← SubtractGeneral([[OriginPoint[0] + ConRadius(ND); OriginPoint[1] + SocketDepth(ND); OriginPoint[2]]], [[OriginPoint[0] - innerdiameter(ND, EN)/2; OriginPoint[1] + SocketDepth(ND) + zc; OriginPoint[2]]])
    Final ← stack(VertPipe, HorizPipe, Zoom, RightSocketOuter, RightSocketInner, SubtractRightSocket, concat(MirrorSocketAcross, MirrorSocketUp, MirrorSocketDown), UnionPieces, CylinderHoriz, SubtractHorizExcess, CylinderVert, SubtractVertExcess)
    for i ∈ 0 .. 2
        Final ← stack(Final, Rotate[i]) if AngleVector[i] ≠ 0
    return Final  # error: This variable is undefined.
