# Pipescript is the main function that creates the list of commands. The function was created by drawing the rapid mixer in AutoCAD and translating that sequence of commands into a text file. That text file was then used as the basis for this function. Pipescript creates rows of text for each command and then stacks them together. The sequence is: draw the outer cylinder for the pipe, draw the inner cylinder for the pipe, subtract the inner from the outer, draw the connector, rotate, draw one set of elements, rotate, and then draw the set of perpendicular elements.
# [reference: MasterProgram.xmcd]
elbowscript(p1, p2, p3, p4, p5, p6, p7, p8, p9, p10, p11, p12, p13, p14, p15, p16, p17, p18, R1, R2, R3, R4, H1, win1, win2) :=
    viewtop ← viewtop
    zoom_win ← zoom_wina(win1, win2)
    torus_big ← torus(p1, R1, R2)
    box1 ← box(p2, p3)
    subtract1 ← subtractD(p4, p1)
    torus_small ← torus(p1, R1, R3)
    subtract2 ← subtractA(p4, p5)
    box2 ← box(p6, p7)
    subtract3 ← subtractD(p8, p1)
    outercylinder ← cylinderB(p9, R4, p10)
    innercylinder ← cylinderB(p9, R2, p10)
    subtract4 ← subtractH(p11, p12, p13)
    mirror ← mirrorA(p14, p15, p16)
    bigunion ← bigunion_elbow(p1, p17, p18, R1, R2)
    one ← concat(viewtop, zoom_win, torus_big, box1, sp, subtract1)
    two ← concat(torus_small, subtract2, box2, sp, subtract3)
    three ← concat(outercylinder, innercylinder, subtract4)
    four ← concat(mirror, bigunion)
    return stack(one, two, three, four)
# Command Explanations:
# viewtop: orients the drawing properly
# outercylinder: draws a cylinder with the specified diameter plus pipe wall thickness
# innercylinder: draws a cylinder with the specified diameter
# zoom: zooms extents to allow for proper selection for subtraction
# subtract: subtracts the inner cylinder from the outer cylinder to form a pipe
# connector: draws a cylinder with the specified connector diameter
# viewleft: changes the viewport. This effectively rotates the pipe to draw the elements more easily.
# elementone: draws a cylinder to form the first element with specified diameter and length equal to the inner diameter.
# number: finds the number of elements. Halves these elements because there are two sets of elements.
# copyone: copies the first element and displaces it in increasing increments of Δxelem
# viewfront: changes the viewport. This effectively rotates the pipe to draw the elements perpendicular to the first set.
# elementtwo: draws a cylinder to form the second element with specified diameter and length equal to the inner diameter.
# copytwo: copies the second element and displaces it in increasing increments of  Δxelements
# shade: gourad shades the drawing
# stack: stacks the commands to be placed into a text file to form the AutoCAD script
elbow(o, ND, EN) := elbowscript([o[0]; o[1]; o[2]], [
    o[0] - (ElbowRadius(ND) + ConRadius(ND));
    o[1] - (ElbowRadius(ND) + ConRadius(ND));
    o[2] - (outerradius(ND) + SocketDepth(ND))
], [o[0]; o[1] + ElbowRadius(ND) + ConRadius(ND); (o[2] + outerradius(ND)) + SocketDepth(ND)], [o[0] + ElbowRadius(ND) + outerradius(ND); o[1]; o[2]], [o[0] - ElbowRadius(ND) - innerD(ND, EN)/2; o[1]; o[2]], [o[0]; o[1] - ElbowRadius(ND) - outerradius(ND) - zc; o[2] - ConRadius(ND)], [o[0] + ElbowRadius(ND) + outerradius(ND) + zc; o[1]; o[2] + ConRadius(ND)], [o[0]; o[1] + ElbowRadius(ND); o[2]], [o[0]; o[1] + ElbowRadius(ND); o[2]], [o[0] - SocketDepth(ND); o[1] + ElbowRadius(ND); o[2]], [o[0]; o[1] + ElbowRadius(ND) - ConRadius(ND); o[2]], [o[0] - SocketDepth(ND) - zc; o[1] + ElbowRadius(ND) - outerradius(ND); o[2]], [o[0] + zc; o[1] + ElbowRadius(ND) + outerradius(ND); o[2]], [o[0] - SocketDepth(ND); o[1] + ElbowRadius(ND) - ConRadius(ND); o[2]], [o[0]; o[1]], [o[0] + zc; o[1] + zc], [o[0] + ElbowRadius(ND); o[1] - SocketDepth(ND); o[2]], [o[0] - SocketDepth(ND); o[1] + ElbowRadius(ND); o[2]], ElbowRadius(ND), outerradius(ND), innerD(ND, EN)/2, ConRadius(ND), SocketDepth(ND), [o[0] - ElbowRadius(ND) - ConRadius(ND) - zc; o[1] - ElbowRadius(ND) - ConRadius(ND) - zc; o[2]], [o[0] + ElbowRadius(ND) + ConRadius(ND) + zc; o[1] + ElbowRadius(ND) + ConRadius(ND) + zc; o[2]])
# a | b | c | d | e | f | g | h | i | j | k | l | m
# n | o | p | q | r
# New Elbow Function
ElbowF(OriginPoint, AngleVector, ND, EN, LayerName) :=
    LayerSelect ← SelectLayer(LayerName)
    Zoom ← zoom_wina([
        OriginPoint[0] - ElbowRadius(ND)/sqrt(2) - ElbowRadius(ND) - ConRadius(ND) - zc;
        OriginPoint[1] - ElbowRadius(ND)/sqrt(2) - ElbowRadius(ND) - ConRadius(ND) - zc;
        OriginPoint[2] - ConRadius(ND) - zc
    ], [
        OriginPoint[0] + (sqrt(2) - 1)*ElbowRadius(ND)/sqrt(2) + ConRadius(ND) + zc;
        OriginPoint[1] + (sqrt(2) - 1)*ElbowRadius(ND)/sqrt(2) + ConRadius(ND) + zc;
        OriginPoint[2] + ConRadius(ND) + zc
    ])
    OuterTorus ← torus(OriginPoint + [-ElbowRadius(ND)/sqrt(2); -ElbowRadius(ND)/sqrt(2); 0 m], ElbowRadius(ND), outerradius(ND))
    Box1 ← box([
        OriginPoint[0] - ElbowRadius(ND) - ElbowRadius(ND)/sqrt(2) - outerradius(ND) - zc;
        OriginPoint[1] - ElbowRadius(ND) - ElbowRadius(ND)/sqrt(2) - outerradius(ND) - zc;
        OriginPoint[2] - outerradius(ND) - zc
    ], [
        OriginPoint[0] - ElbowRadius(ND)/sqrt(2);
        OriginPoint[1] + (sqrt(2) - 1)*ElbowRadius(ND)/sqrt(2) + outerradius(ND) + zc;
        OriginPoint[2] + outerradius(ND) + zc
    ])
    Subtract1 ← subtractD([
        OriginPoint[0] + (sqrt(2) - 1)*ElbowRadius(ND)/sqrt(2) + outerradius(ND);
        OriginPoint[1] - ElbowRadius(ND)/sqrt(2);
        OriginPoint[2]
    ], [
        OriginPoint[0] - ElbowRadius(ND) - ElbowRadius(ND)/sqrt(2) - outerradius(ND) - zc;
        OriginPoint[1] - ElbowRadius(ND) - ElbowRadius(ND)/sqrt(2) - outerradius(ND) - zc;
        OriginPoint[2]
    ])
    InnerTorus ← torus(OriginPoint + [-ElbowRadius(ND)/sqrt(2); -ElbowRadius(ND)/sqrt(2); 0 m], ElbowRadius(ND), innerD(ND, EN)/2)
    Subtract2 ← subtractA([
        OriginPoint[0] + (sqrt(2) - 1)*ElbowRadius(ND)/sqrt(2) + outerradius(ND);
        OriginPoint[1] - ElbowRadius(ND)/sqrt(2);
        OriginPoint[2]
    ], [
        OriginPoint[0] - ElbowRadius(ND)/sqrt(2) - ElbowRadius(ND) - innerD(ND, EN)/2;
        OriginPoint[1] - ElbowRadius(ND)/sqrt(2);
        OriginPoint[2]
    ])
    Box2 ← box([
        OriginPoint[0] - ElbowRadius(ND)/sqrt(2);
        OriginPoint[1] - ElbowRadius(ND)/sqrt(2);
        OriginPoint[2] - outerradius(ND) - zc
    ], [
        OriginPoint[0] + (sqrt(2) - 1)*ElbowRadius(ND)/sqrt(2) + ConRadius(ND) + zc;
        OriginPoint[1] - ElbowRadius(ND)/sqrt(2) - ElbowRadius(ND) - ConRadius(ND) - zc;
        OriginPoint[2] + ConRadius(ND) + zc
    ])
    Subtract3 ← subtractD([
        OriginPoint[0] - ElbowRadius(ND)/sqrt(2);
        OriginPoint[1] + (sqrt(2) - 1)*ElbowRadius(ND)/sqrt(2) + outerradius(ND);
        OriginPoint[2]
    ], [
        OriginPoint[0] - ElbowRadius(ND)/sqrt(2);
        OriginPoint[1] - ElbowRadius(ND)/sqrt(2);
        OriginPoint[2] - outerradius(ND) - zc
    ])
    OuterCylinder ← cylinderB([
        OriginPoint[0] - ElbowRadius(ND)/sqrt(2);
        OriginPoint[1] + (sqrt(2) - 1)*ElbowRadius(ND)/sqrt(2);
        OriginPoint[2]
    ], ConRadius(ND), [
        OriginPoint[0] - ElbowRadius(ND)/sqrt(2) - SocketDepth(ND);
        OriginPoint[1] + (sqrt(2) - 1)*ElbowRadius(ND)/sqrt(2);
        OriginPoint[2]
    ])
    InnerCylinder ← cylinderB([
        OriginPoint[0] - ElbowRadius(ND)/sqrt(2) + zc;
        OriginPoint[1] + (sqrt(2) - 1)*ElbowRadius(ND)/sqrt(2);
        OriginPoint[2]
    ], outerradius(ND), [
        OriginPoint[0] - ElbowRadius(ND)/sqrt(2) - SocketDepth(ND) - zc;
        OriginPoint[1] + (sqrt(2) - 1)*ElbowRadius(ND)/sqrt(2);
        OriginPoint[2]
    ])
    Subtract4 ← subtractD([
        OriginPoint[0] - ElbowRadius(ND)/sqrt(2);
        OriginPoint[1] + (sqrt(2) - 1)*ElbowRadius(ND)/sqrt(2) - ConRadius(ND);
        OriginPoint[2]
    ], [
        OriginPoint[0] - ElbowRadius(ND)/sqrt(2) - SocketDepth(ND) - zc;
        OriginPoint[1] + (sqrt(2) - 1)*ElbowRadius(ND)/sqrt(2) + outerradius(ND);
        OriginPoint[2]
    ])
    Mirror ← mirrorA([
        OriginPoint[0] - ElbowRadius(ND)/sqrt(2) - SocketDepth(ND);
        OriginPoint[1] + (sqrt(2) - 1)*ElbowRadius(ND)/sqrt(2) + outerradius(ND);
        OriginPoint[2]
    ], [OriginPoint[0] - ElbowRadius(ND)/sqrt(2); OriginPoint[0] - ElbowRadius(ND)/sqrt(2)], [OriginPoint[0] - ElbowRadius(ND)/sqrt(2) + zc; OriginPoint[0] - ElbowRadius(ND)/sqrt(2) + zc])
    Union ← bigunion_elbow(OriginPoint, [
        OriginPoint[0] - ElbowRadius(ND)/sqrt(2) + ElbowRadius(ND);
        OriginPoint[1] - ElbowRadius(ND)/sqrt(2) - SocketDepth(ND);
        OriginPoint[2]
    ], [
        OriginPoint[0] - ElbowRadius(ND)/sqrt(2) - SocketDepth(ND);
        OriginPoint[1] - ElbowRadius(ND)/sqrt(2) + ElbowRadius(ND);
        OriginPoint[2]
    ], ElbowRadius(ND), outerradius(ND))
    Rotate ← [
        Rotate3DLast(OriginPoint, "x", AngleVector[0]);
        Rotate3DLast(OriginPoint, "y", AngleVector[1]);
        Rotate3DLast(OriginPoint, "z", AngleVector[2])
    ]
    Freeze ← FreezeLayer(LayerName)
    One ← stack(viewtop1, LayerSelect, concat(Zoom, OuterTorus, Box1, sp, Subtract1))
    Two ← concat(InnerTorus, Subtract2, Box2, sp, Subtract3)
    Three ← concat(OuterCylinder, InnerCylinder, Subtract4)
    Final ← stack(One, Two, Three, concat(Mirror, Union))
    for i ∈ 0 .. 2
        Final ← stack(Final, Rotate[i]) if AngleVector[i] ≠ 0
    return stack(Final, Freeze)
ElbowF([0; 0; 0]*m, [0; 0; 0]*deg, 16 in, 8, "elb") = [
    "_-view o t";
    "-layer t elb";
    "  ";
    "-layer s elb";
    "  ";
    "_zoom w -1.29449,-1.29449,-0.25384 0.43239,0.43239,0.25384 _torus -0.43105,-0.43105,0 0.6096 0.2032 _box -1.25385,-1.25385,-0.2132 -0.43105,0.39175,0.2132 _subtract 0.38175,-0.43105,0  -1.25385,-1.25385,0 ";
    "_torus -0.43105,-0.43105,0 0.6096 0.18664 _subtract 0.38175,-0.43105,0  -1.22729,-0.43105,0  _box -0.43105,-0.43105,-0.2132 0.43239,-1.29449,0.25384 _subtract -0.43105,0.38175,0  -0.43105,-0.43105,-0.2132 ";
    "_cylinder -0.43105,0.17855,0 0.24384 a -0.53305,0.17855,0 _cylinder -0.42105,0.17855,0 0.2032 a -0.54305,0.17855,0 _subtract -0.43105,-0.06529,0  -0.54305,0.38175,0 ";
    "_mirror -0.53305,0.38175,0  -0.43105,-0.43105 -0.42105,-0.42105  _union 0,0,0 1 @0.8128<45 0.17855,-0.53305,0 -0.53305,0.17855,0 ";
    "-group c elb y ";
    "all ";
    "-layer s 0";
    "  ";
    "-layer f elb";
    "  "
]
# [component: inputs ElbowF([0; 0; 0]*m, [0; 0; 0]*deg, 16 in, 8, "elb")]
