# Pipescript is the main function that creates the list of commands. The function was created by drawing the rapid mixer in AutoCAD and translating that sequence of commands into a text file. That text file was then used as the basis for this function. Pipescript creates rows of text for each command and then stacks them together. The sequence is: draw the outer cylinder for the pipe, draw the inner cylinder for the pipe, subtract the inner from the outer, draw the connector, rotate, draw one set of elements, rotate, and then draw the set of perpendicular elements.
elbowscript(p1, p2, p3, p4, p5, p6, p7, p8, p9, p10, p11, p12, p13, p14, p15, p16, p17, p18, R1, R2, R3, R4, H1, win1, win2) :=
    viewtop ← viewtop
    zoom_win ← zoom_wina(win1, win2)
    torus_big ← torus(p1, R1, R2)
    box1 ← box(p2, p3)
    subtract1 ← SubtractGeneral([p4], [p1])
    torus_small ← torus(p1, R1, R3)
    subtract2 ← SubtractGeneral([p4], [p5])
    box2 ← box(p6, p7)
    subtract3 ← SubtractGeneral([p8], [p1])
    outercylinder ← cylinderB(p9, R4, p10)
    innercylinder ← cylinderB(p9, R2, p10)
    subtract4 ← SubtractGeneral([p11], [p12; p13])
    mirror ← mirrorA(p14, p15, p16)
    bigunion ← bigunion_elbow(p1, p17, p18, R1, R2)
    one ← concat(viewtop, zoom_win, torus_big, box1, sp, subtract1)
    two ← concat(torus_small, subtract2, sp, box2, sp, subtract3)
    three ← concat(outercylinder, innercylinder, subtract4)
    four ← concat(mirror, bigunion)
    return stack(one, two, three, four)  # error: This variable is undefined.
# Command Explanations:
# viewtop: orients the drawing properly
# outercylinder: draws a cylinder with the specified diameter plus pipe wall thickness
# innercylinder: draws a cylinder with the specified diameter
# zoom: zooms extents to allow for proper selection for subtraction
# subtract: subtracts the inner cylinder from the outer cylinder to form a pipe
# connector: draws a cylinder with the specified connector diameter
# viewleft: changes the viewport. This effectively rotates the pipe to draw the elements more easily.
# elementone: draws a cylinder to form the first element with specified diameter and length equal to the inner diameter.
# number: finds the number of elements. Halves these elements because there are two sets of elements.
# copyone: copies the first element and displaces it in increasing increments of Δxelem
# viewfront: changes the viewport. This effectively rotates the pipe to draw the elements perpendicular to the first set.
# elementtwo: draws a cylinder to form the second element with specified diameter and length equal to the inner diameter.
# copytwo: copies the second element and displaces it in increasing increments of  Δxelements
# shade: gourad shades the drawing
# stack: stacks the commands to be placed into a text file to form the AutoCAD script
elbow(o, ND, EN) := elbowscript([o[0]; o[1]; o[2]], [
    o[0] - (ElbowRadius(ND) + ConRadius(ND));
    o[1] - (ElbowRadius(ND) + ConRadius(ND));
    o[2] - (outerradius(ND) + SocketDepth(ND))
], [o[0]; o[1] + ElbowRadius(ND) + ConRadius(ND); (o[2] + outerradius(ND)) + SocketDepth(ND)], [o[0] + ElbowRadius(ND) + outerradius(ND); o[1]; o[2]], [o[0] - ElbowRadius(ND) - innerD(ND, EN)/2; o[1]; o[2]], [o[0]; o[1] - ElbowRadius(ND) - outerradius(ND) - zc; o[2] - ConRadius(ND)], [o[0] + ElbowRadius(ND) + outerradius(ND) + zc; o[1]; o[2] + ConRadius(ND)], [o[0]; o[1] + ElbowRadius(ND); o[2]], [o[0]; o[1] + ElbowRadius(ND); o[2]], [o[0] - SocketDepth(ND); o[1] + ElbowRadius(ND); o[2]], [o[0]; o[1] + ElbowRadius(ND) - ConRadius(ND); o[2]], [o[0] - SocketDepth(ND) - zc; o[1] + ElbowRadius(ND) - outerradius(ND); o[2]], [o[0] + zc; o[1] + ElbowRadius(ND) + outerradius(ND); o[2]], [o[0] - SocketDepth(ND); o[1] + ElbowRadius(ND) - ConRadius(ND); o[2]], [o[0]; o[1]], [o[0] + zc; o[1] + zc], [o[0] + ElbowRadius(ND); o[1] - SocketDepth(ND); o[2]], [o[0] - SocketDepth(ND); o[1] + ElbowRadius(ND); o[2]], ElbowRadius(ND), outerradius(ND), innerD(ND, EN)/2, ConRadius(ND), SocketDepth(ND), [o[0] - ElbowRadius(ND) - ConRadius(ND) - zc; o[1] - ElbowRadius(ND) - ConRadius(ND) - zc; o[2]], [o[0] + ElbowRadius(ND) + ConRadius(ND) + zc; o[1] + ElbowRadius(ND) + ConRadius(ND) + zc; o[2]])  # error: This variable is undefined.
# a | b | c | d | e | f | g | h | i | j | k | l | m
# n | o | p | q | r
# New Elbow Function
# The elbow is initially oriented with an arm along the negative x axis and another along the negative y axis. The origin defined the inner edge of the socket on the y axis arm.
ElbowF(OriginPoint, AngleVector, ND, EN) :=
    Zoom ← zoom_wina([
        OriginPoint[0] - 2*ElbowRadius(ND) - ConRadius(ND) - zc;
        OriginPoint[1] - ElbowRadius(ND) - ConRadius(ND) - zc;
        OriginPoint[2] - ConRadius(ND) - zc
    ], [
        OriginPoint[0] + ConRadius(ND) + zc;
        OriginPoint[1] + ElbowRadius(ND) + ConRadius(ND) + zc;
        OriginPoint[2] + ConRadius(ND) + zc
    ])
    OuterTorus ← torus(OriginPoint + [-ElbowRadius(ND); 0 m; 0 m], ElbowRadius(ND), outerradius(ND))
    Box1 ← box([
        OriginPoint[0] - 2*ElbowRadius(ND) - outerradius(ND) - zc;
        OriginPoint[1] - ElbowRadius(ND) - outerradius(ND) - zc;
        OriginPoint[2] - outerradius(ND) - zc
    ], [
        OriginPoint[0] - ElbowRadius(ND);
        OriginPoint[1] + ElbowRadius(ND) + outerradius(ND) + zc;
        OriginPoint[2] + outerradius(ND) + zc
    ])
    Subtract1 ← SubtractGeneral([[OriginPoint[0] + outerradius(ND); OriginPoint[1]; OriginPoint[2]]], [[
        OriginPoint[0] - 2*ElbowRadius(ND) - outerradius(ND) - zc;
        OriginPoint[1] - ElbowRadius(ND) - outerradius(ND) - zc;
        OriginPoint[2] - outerradius(ND) - zc
    ]])
    InnerTorus ← torus(OriginPoint + [-ElbowRadius(ND); 0 m; 0 m], ElbowRadius(ND), innerdiameter(ND, EN)/2)
    Subtract2 ← SubtractGeneral([[OriginPoint[0] + outerradius(ND); OriginPoint[1]; OriginPoint[2]]], [[OriginPoint[0] - 2*ElbowRadius(ND) - innerdiameter(ND, EN)/2; OriginPoint[1]; OriginPoint[2]]])
    Box2 ← box([
        OriginPoint[0] - ElbowRadius(ND) - zc;
        OriginPoint[1] - ElbowRadius(ND) - outerradius(ND) - zc;
        OriginPoint[2] - outerradius(ND) - zc
    ], [OriginPoint[0] + outerradius(ND) + zc; OriginPoint[1]; OriginPoint[2] + outerradius(ND) + zc])
    Subtract3 ← SubtractGeneral([[
        OriginPoint[0] - ElbowRadius(ND);
        OriginPoint[1] + ElbowRadius(ND) + outerradius(ND);
        OriginPoint[2]
    ]], [[
        OriginPoint[0] - ElbowRadius(ND) - zc;
        OriginPoint[1] - ElbowRadius(ND) - outerradius(ND) - zc;
        OriginPoint[2] - outerradius(ND) - zc
    ]])
    OuterCylinder ← cylinderB([OriginPoint[0] - ElbowRadius(ND); OriginPoint[1] + ElbowRadius(ND); OriginPoint[2]], ConRadius(ND), [
        OriginPoint[0] - ElbowRadius(ND) - SocketDepth(ND);
        OriginPoint[1] + ElbowRadius(ND);
        OriginPoint[2]
    ])
    InnerCylinder ← cylinderB([OriginPoint[0] - ElbowRadius(ND) + zc; OriginPoint[1] + ElbowRadius(ND); OriginPoint[2]], outerradius(ND), [
        OriginPoint[0] - ElbowRadius(ND) - SocketDepth(ND) - zc;
        OriginPoint[1] + ElbowRadius(ND);
        OriginPoint[2]
    ])
    Subtract4 ← SubtractGeneral([[OriginPoint[0] - ElbowRadius(ND); OriginPoint[1] + ElbowRadius(ND) - ConRadius(ND); OriginPoint[2]]], [[
        OriginPoint[0] - ElbowRadius(ND) + zc;
        OriginPoint[1] + ElbowRadius(ND) - outerradius(ND);
        OriginPoint[2]
    ]])
    Mirror ← mirrorA([OriginPoint[0] - ElbowRadius(ND); OriginPoint[1] + ElbowRadius(ND); OriginPoint[2]], [OriginPoint[0] - ElbowRadius(ND); OriginPoint[1]], [OriginPoint[0] - ElbowRadius(ND) + zc; OriginPoint[1] + zc])
    Union ← UnionMultiple([
        [OriginPoint[0] + ConRadius(ND); OriginPoint[1] - SocketDepth(ND); OriginPoint[2]];
        [
            OriginPoint[0] - ElbowRadius(ND) + ElbowRadius(ND)/sqrt(2);
            OriginPoint[1] + ElbowRadius(ND)/sqrt(2);
            OriginPoint[2]
        ];
        [OriginPoint[0] - ElbowRadius(ND); OriginPoint[1] + ElbowRadius(ND) + ConRadius(ND); OriginPoint[2]]
    ])
    Rotate ← [
        Rotate3DLast(OriginPoint, "z", AngleVector[0]);
        Rotate3DLast(OriginPoint, "y", AngleVector[1]);
        Rotate3DLast(OriginPoint, "x", AngleVector[2])
    ]
    One ← stack(viewtop1, concat(Zoom, OuterTorus, Box1, sp, Subtract1))
    Two ← concat(InnerTorus, Subtract2, sp, Box2, sp, Subtract3)
    Three ← concat(OuterCylinder, InnerCylinder, Subtract4)
    Final ← stack(One, Two, Three, concat(Mirror, Union))
    for i ∈ 0 .. 2
        Final ← stack(Final, Rotate[i]) if AngleVector[i] ≠ 0
    return Final  # error: This variable is undefined.
ElbowSUBF(OriginPoint, AngleVector, ND, EN, SubtractionLayers) :=
    Zoom ← zoom_wina([
        OriginPoint[0] - 2*ElbowRadius(ND) - ConRadius(ND) - zc;
        OriginPoint[1] - ElbowRadius(ND) - ConRadius(ND) - zc;
        OriginPoint[2] - ConRadius(ND) - zc
    ], [
        OriginPoint[0] + ConRadius(ND) + zc;
        OriginPoint[1] + ElbowRadius(ND) + ConRadius(ND) + zc;
        OriginPoint[2] + ConRadius(ND) + zc
    ])
    OuterTorus ← torus(OriginPoint + [-ElbowRadius(ND); 0 m; 0 m], ElbowRadius(ND), outerradius(ND))
    Box1 ← box([
        OriginPoint[0] - 2*ElbowRadius(ND) - outerradius(ND) - zc;
        OriginPoint[1] - ElbowRadius(ND) - outerradius(ND) - zc;
        OriginPoint[2] - outerradius(ND) - zc
    ], [
        OriginPoint[0] - ElbowRadius(ND);
        OriginPoint[1] + ElbowRadius(ND) + outerradius(ND) + zc;
        OriginPoint[2] + outerradius(ND) + zc
    ])
    Subtract1 ← SubtractGeneral([[OriginPoint[0] + outerradius(ND); OriginPoint[1]; OriginPoint[2]]], [[
        OriginPoint[0] - 2*ElbowRadius(ND) - outerradius(ND) - zc;
        OriginPoint[1] - ElbowRadius(ND) - outerradius(ND) - zc;
        OriginPoint[2] - outerradius(ND) - zc
    ]])
    Box2 ← box([
        OriginPoint[0] - ElbowRadius(ND) - zc;
        OriginPoint[1] - ElbowRadius(ND) - outerradius(ND) - zc;
        OriginPoint[2] - outerradius(ND) - zc
    ], [OriginPoint[0] + outerradius(ND) + zc; OriginPoint[1]; OriginPoint[2] + outerradius(ND) + zc])
    Subtract3 ← SubtractGeneral([[
        OriginPoint[0] - ElbowRadius(ND);
        OriginPoint[1] + ElbowRadius(ND) + outerradius(ND);
        OriginPoint[2]
    ]], [[
        OriginPoint[0] - ElbowRadius(ND) - zc;
        OriginPoint[1] - ElbowRadius(ND) - outerradius(ND) - zc;
        OriginPoint[2] - outerradius(ND) - zc
    ]])
    OuterCylinder ← cylinderB([OriginPoint[0] - ElbowRadius(ND); OriginPoint[1] + ElbowRadius(ND); OriginPoint[2]], ConRadius(ND), [
        OriginPoint[0] - ElbowRadius(ND) - SocketDepth(ND);
        OriginPoint[1] + ElbowRadius(ND);
        OriginPoint[2]
    ])
    Mirror ← mirrorA([OriginPoint[0] - ElbowRadius(ND); OriginPoint[1] + ElbowRadius(ND); OriginPoint[2]], [OriginPoint[0] - ElbowRadius(ND); OriginPoint[1]], [OriginPoint[0] - ElbowRadius(ND) + zc; OriginPoint[1] + zc])
    Union ← UnionMultiple([
        [OriginPoint[0] + ConRadius(ND); OriginPoint[1] - SocketDepth(ND); OriginPoint[2]];
        [
            OriginPoint[0] - ElbowRadius(ND) + ElbowRadius(ND)/sqrt(2);
            OriginPoint[1] + ElbowRadius(ND)/sqrt(2);
            OriginPoint[2]
        ];
        [OriginPoint[0] - ElbowRadius(ND); OriginPoint[1] + ElbowRadius(ND) + ConRadius(ND); OriginPoint[2]]
    ])
    Rotate ← [
        Rotate3DLast(OriginPoint, "z", AngleVector[0]);
        Rotate3DLast(OriginPoint, "y", AngleVector[1]);
        Rotate3DLast(OriginPoint, "x", AngleVector[2])
    ]
    Final ← stack(viewtop1, concat(Zoom, OuterTorus, Box1, sp, Subtract1), concat(Box2, sp, Subtract3), concat(OuterCylinder, Mirror, Union))
    for i ∈ 0 .. 2
        Final ← stack(Final, Rotate[i]) if AngleVector[i] ≠ 0
    Group ← GroupLast("DeleteMe")
    Local ← stack(Final, Group, SubtractF(SubtractionLayers, "DeleteMe"))
    InnerTorus ← torus(OriginPoint + [-ElbowRadius(ND); 0 m; 0 m], ElbowRadius(ND), innerdiameter(ND, EN)/2)
    Subtract2 ← SubtractGeneral([[OriginPoint[0] + outerradius(ND); OriginPoint[1]; OriginPoint[2]]], [[OriginPoint[0] - 2*ElbowRadius(ND) - innerdiameter(ND, EN)/2; OriginPoint[1]; OriginPoint[2]]])
    InnerCylinder ← cylinderB([OriginPoint[0] - ElbowRadius(ND) + zc; OriginPoint[1] + ElbowRadius(ND); OriginPoint[2]], outerradius(ND), [
        OriginPoint[0] - ElbowRadius(ND) - SocketDepth(ND) - zc;
        OriginPoint[1] + ElbowRadius(ND);
        OriginPoint[2]
    ])
    Subtract4 ← SubtractGeneral([[OriginPoint[0] - ElbowRadius(ND); OriginPoint[1] + ElbowRadius(ND) - ConRadius(ND); OriginPoint[2]]], [[
        OriginPoint[0] - ElbowRadius(ND) + zc;
        OriginPoint[1] + ElbowRadius(ND) - outerradius(ND);
        OriginPoint[2]
    ]])
    One ← stack(viewtop1, concat(Zoom, OuterTorus, Box1, sp, Subtract1))
    Two ← concat(InnerTorus, Subtract2, sp, Box2, sp, Subtract3)
    Three ← concat(OuterCylinder, InnerCylinder, Subtract4)
    Final2 ← stack(One, Two, Three, concat(Mirror, Union))
    Draw ← stack(Local, Final2)
    for i ∈ 0 .. 2
        Draw ← stack(Draw, Rotate[i]) if AngleVector[i] ≠ 0
    return Draw  # error: This variable is undefined.
