# [reference: MasterProgram.xmcd]
# Automated Design: AutoCAD: Flocculation Tank
EN_FlocHoriz = 1
H_FlocOption = 0
Q_Plant = 0.2 m^3/s
# Dimensions
totalfloc_dim := [
    L_FlocTank/N_FlocChannels;
    (N_FlocChannels*W_FlocChannel) + ((N_FlocChannels - 1)*T_PlantWall);
    H_Floc
]
wall_dim := [totalfloc_dim[0] + (2*T_PlantWall); T_PlantWall; totalfloc_dim[2]]
flocport_dim :=
    for i ∈ 0 .. (N_FlocChannels - 2)
        flocport_dim[0, i] ← [W_FlocPort[N_FlocChannels - 2 - i]; T_PlantWall; (-H_FlocPort)[i]]
    return flocport_dim
# Floc ports connect the channels.
channelopening_dim := [W_InletChannelEst; T_PlantWall; (H_Floc - H_Sed) + H_InletChannel + (HW_Sed - HW_FlocChannel)] = [0.854508; 0.15; 1.20872] m
# normally want a 30deg slope, unless baffle is too close | set slope to be 5 cm away from nearest baffle
flocdrainslope_dim :=
    [sqrt(3)*H_FlocSlope; -D_FlocValve; -H_FlocSlope] if sqrt(3)*H_FlocSlope < W_FlocPort[0] + S_FlocPortGap - 5 cm
    [W_FlocPort[0] + S_FlocPortGap - 5 cm; -D_FlocValve; -H_FlocSlope] otherwise
# Origin Points
floc_origin := [
    Plant_Origin[0];
    Plant_Origin[1] + N_SedTanks*(W_Sed + T_PlantWall);
    Plant_Origin[2] + (HW_Sed - HW_FlocChannel)
]
wall_origin :=
    for i ∈ 0 .. (N_FlocChannels - 2)
        wall_origin[0, i] ← [
            floc_origin[0] - totalfloc_dim[0] - T_PlantWall;
            floc_origin[1] + (W_FlocChannel*(1 + i)) + (T_PlantWall*i);
            floc_origin[2]
        ]
    return wall_origin
flocport_origin :=
    for i ∈ 0 .. (N_FlocChannels - 2)
        if mod(i, 2) == 0
            flocport_origin[0, i] ← [
                floc_origin[0] - W_FlocPort[N_FlocChannels - 2 - i];
                floc_origin[1] + (W_FlocChannel*(1 + i)) + (T_PlantWall*i);
                floc_origin[2] + H_FlocPort[i]
            ]
        otherwise
            flocport_origin[0, i] ← [
                floc_origin[0] - totalfloc_dim[0];
                floc_origin[1] + (W_FlocChannel*(1 + i)) + (T_PlantWall*i);
                floc_origin[2] + H_FlocPort[i]
            ]
    return flocport_origin
# The flocport origins were set to start at the top height of the ports themselves (added to the origin otherwise it disappears).  This changes the flocports to be at the bottom of the channel dividing walls instead of at the top (more structurally sound).
flocport_origin = [[-0.613848; 19.4015; 2.2555], [-14.8908; 21.3931; 2.2555], [-0.613848; 23.3846; 2.2555]] m
# The x values were negative. I don't understand how the change in the floc code caused this problem.
# The Channel Opening was changed in the z-direction so that the bottom opening aligned with the bottom of the tank (for the same reason as the flocports).
channelopening_origin := [
    floc_origin[0] - totalfloc_dim[0];
    floc_origin[1] - T_PlantWall;
    floc_origin[2] + totalfloc_dim[2] - channelopening_dim[2]
] = [-14.8908; 17.41; 1.04678] m
# Flocculation Tank Script
FlocTankInitializeTest :=
    box ← box([100; 100; 100]*m, [101; 101; 101]*m)
    GroupDelete ← GroupAll("DeleteMe")
    GroupFlocTank ← GroupAll("floctank")
    GroupAdapter ← GroupAll("FlocDrainAdapter")
    erase ← EraseAll
    new ← layer_new("floctank", dkgrey)
    new2 ← layer_new("FlocDrainAdapter", green)
    set ← layer_set("0")
    freeze ← layer_freeze("floctank")
    freeze2 ← layer_freeze("FlocDrainAdapter")
    return stack(box, GroupDelete, GroupFlocTank, GroupAdapter, erase, new, new2, set, freeze, freeze2)
# initializing box will be created in sed tank code with these dimensions
# that same box will be erased in the entrance tank code
# all layers must be created in the first script and assigned a group of the same name
# The "DeleteMe" will have already been created in the Sed Tank
#
# stack FlocTankInitializeTest when giving a file output to test code
# when saving as the final file, make sure to stack FlocTankInitialize, NOT FlocTankInitializeTest
FlocTankInitialize :=
    GroupFlocTank ← Group("floctank", [101; 101; 101]*m)
    GroupAdapter ← Group("FlocDrainAdapter", [101; 101; 101]*m)
    NewFlocTank ← layer_new("floctank", dkgrey)
    NewAdapter ← layer_new("FlocDrainAdapter", green)
    Set ← layer_set("0")
    FreezeFlocTank ← layer_freeze("floctank")
    FreezeAdapter ← layer_freeze("FlocDrainAdapter")
    return stack(GroupFlocTank, GroupAdapter, NewFlocTank, NewAdapter, Set, FreezeFlocTank, FreezeAdapter)
Floctanktankscript :=
    local ← stack(layer_thaw("floctank"), layer_set("floctank"))
    local ← stack(local, Tank(floc_origin, totalfloc_dim, T_PlantWall))
    for i ∈ 0 .. (N_FlocChannels - 2)
        local ← stack(local, box(wall_origin[0, i], wall_origin[0, i] + wall_dim), box(flocport_origin[0, i], flocport_origin[0, i] + flocport_dim[0, i]), subtractD(wall_origin[0, i], flocport_origin[0, i]))
        local
    bigunion1 ← union_allA
    Group ← GroupAll("floctank")
    layerset1 ← layer_set("0")
    layerfreeze1 ← layer_freeze("floctank")
    one ← stack(local, bigunion1, Group, layerset1, layerfreeze1)
    return one  # The floc tank and dividing walls are now a single object
Floctankchannelopeningscript :=
    layer3 ← layer_new("flocchannelhole", dkgrey)
    box3 ← box(channelopening_origin, channelopening_origin + channelopening_dim)
    layerset3 ← layer_set("0")
    layerthaw3 ← layer_thaw("floctank")
    viewtop ← viewtop1
    subtract3 ← subtractD(floc_origin, [
        floc_origin[0] - totalfloc_dim[0];
        floc_origin[1] - T_PlantWall;
        floc_origin[2] + totalfloc_dim[2] - H_InletChannel
    ])
    bigunion ← union_allA
    layerfreeze3 ← layer_freeze("floctank")
    layerfreeze4 ← layer_freeze("flocchannelhole")
    one ← stack(layer3, box3, layerset3, layerthaw3, viewtop, subtract3, bigunion, layerfreeze3, layerfreeze4)
    return ← one
Flocchannelslotscript :=
    if L_Slot ≠ 0 m
        local ← layer_new("flocchannelslot", blue)
        for j ∈ 0 .. (N_FlocChannels - 1)
            for i ∈ 0 .. (N_FlocChannelBaffles[j] - 1)
                slot_origin[i] ← [floc_origin[0] - L_Sed; -L_Slot; floc_origin[2]] + [X_FlocBaffles[i, j]; Y_FlocBaffles[0, j]; Z_FlocBaffles[i, j]]
                slot_dim[i] ← [T_FlocBaffle; W_FlocChannel + 2*L_Slot; H_Floc - Z_FlocBaffles[i, j]]
                boxslots ← box(slot_origin[i], slot_origin[i] + slot_dim[i])
                local ← stack(local, boxslots)
                local
            local
        layerthaw4 ← layer_thaw("floctank")
        view1 ← viewtop1
        subtract4 ← subtractDall(floc_origin)
        layerset1 ← layer_set("0")
        layerfreeze5 ← layer_freeze("floctank")
        layerfreeze6 ← layer_freeze("flocchannelslot")
        local ← stack(local, layerthaw4, view1, subtract4, layerset1, layerfreeze5, layerfreeze6)
    return local
# This script will not execute if the user choses not to draw slots.
# The slots are drawn and then subtracted all at once
FloctankbafflescriptV :=
    if EN_FlocHoriz == 0
        local ← layer_new("baffle", ltpurple)
        for j ∈ 0 .. (N_FlocChannels - 1)
            for i ∈ 0 .. (N_FlocChannelBaffles[j] - 1)
                baffle_origin[i] ← [floc_origin[0] - L_Sed; -L_Slot; floc_origin[2]] + [X_FlocBaffles[i, j]; Y_FlocBaffles[0, j]; Z_FlocBaffles[i, j]]
                baffle_dim[i] ← [T_FlocBaffle; W_FlocChannel + 2*L_Slot; L_FlocBaffles[i, j]]
                bafflebox ← box(baffle_origin[i], baffle_origin[i] + baffle_dim[i])
                local ← stack(local, bafflebox)
                local
            local
        view1 ← viewtop1
        union1 ← union_allA
        layerset1 ← layer_set("0")
        layerfreeze1 ← layer_freeze("baffle")
        local ← stack(local, view1, union1, layerset1, layerfreeze1)
    return local
FloctankbafflescriptH :=
    if EN_FlocHoriz == 1
        local ← layer_new("baffle", ltpurple)
        for j ∈ 0 .. (N_FlocChannels - 1)
            for i ∈ 0 .. (N_FlocChannelBaffles[j] - 1)
                baffle_origin[i] ← [floc_origin[0] - L_Sed; -L_Slot; floc_origin[2]] + [X_FlocBaffles[i, j]; Y_FlocBaffles[i, j]; Z_FlocBaffles[i, j]]
                baffle_dim[i] ← [T_FlocBaffle; L_FlocBaffles[i, j]; H_Floc]
                bafflebox ← box(baffle_origin[i], baffle_origin[i] + baffle_dim[i])
                local ← stack(local, bafflebox)
                local
            local
        view1 ← viewtop1
        union1 ← union_allA
        layerset1 ← layer_set("0")
        layerfreeze1 ← layer_freeze("baffle")
        local ← stack(local, view1, union1, layerset1, layerfreeze1)
    return local
# Baffles are drawn as rectangles, not lamina.
# The baffles are unioned so as to subtract the ports (see following script) in a single command
Floctankbafflescript :=
    Floctankbafflescript ← FloctankbafflescriptH if EN_FlocHoriz == 1
    Floctankbafflescript ← FloctankbafflescriptV otherwise
Floctankbaffleportscript :=
    if EN_FlocHoriz == 0
        local ← layer_new("baffleport", ltpurple)
        port_dim ← [T_FlocBaffle + 2*zc; L_BafflePort + L_Slot; L_BafflePort]
        for j ∈ 0 .. (N_FlocChannels - 1)
            for i ∈ 0 .. N_FlocChannelBaffles[j] - 1
                if (mod(i, 2) == 1 and j == N_FlocChannels - 1) or (mod(i, 2) == 0 and j ≠ N_FlocChannels - 1)
                    port_origin[i] ← [floc_origin[0] - L_Sed - zc; W_FlocChannel - L_BafflePort; floc_origin[2]] + [X_FlocBaffles[i, j]; Y_FlocBaffles[0, j]; Z_FlocBaffles[i, j]] if (mod(i, 4) == 0 and j ≠ (N_FlocChannels - 1)) or (mod(i - 1, 4) == 0 and j == (N_FlocChannels - 1))
                    port_origin[i] ← [floc_origin[0] - L_Sed - zc; -L_Slot; floc_origin[2]] + [X_FlocBaffles[i, j]; Y_FlocBaffles[0, j]; Z_FlocBaffles[i, j]] otherwise
                    portbox ← box(port_origin[i], port_origin[i] + port_dim)
                    local ← stack(local, portbox)
                    local
            local
        view ← viewtop1
        union1 ← union_allA
        layerthaw1 ← layer_thaw("baffle")
        subtract1 ← subtractD([floc_origin[0] - L_Sed; -L_Slot; floc_origin[2]] + [
            X_FlocBaffles[0, N_FlocChannels - 1];
            Y_FlocBaffles[0, N_FlocChannels - 1];
            Z_FlocBaffles[0, N_FlocChannels - 1]
        ], [T_FlocBaffle + 2*zc; W_FlocChannel; L_BafflePort] + [floc_origin[0] - L_Sed - zc; 0; floc_origin[2]] + [X_FlocBaffles[0, 0]; Y_FlocBaffles[0, 0]; Z_FlocBaffles[0, 0]])
        layerset1 ← layer_set("0")
        layerfreeze1 ← layer_freeze("baffle")
        layerfreeze2 ← layer_freeze("baffleport")
        local ← stack(local, view, union1, layerthaw1, subtract1, layerset1, layerfreeze1, layerfreeze2)
    return local
# Adds the dimension of the slot in the y-direction for ease of construction
# This is only for vertical
# Currently selecting the left side of the port, the upper corner of the port inside the slot.
# This selects the first baffle to subtract from and the first port in the last channel
Floctankdrainadapterscript :=
    for i ∈ 0 .. last(Y_FlocDrainValves)
        Local ← stack(Local, MaleAdapterSUBF([-L_Sed; Y_FlocDrainValves[i]; floc_origin[2]], T_PlantWall + 0.5*D_FlocValve, [0; 0]*deg, ND_FlocValve, EN_PipeSpec, "FlocDrainAdapter", ["floctank"]))
    return Local
# This draws the valves on the far side (left side from top view) viewing from the right side
Floctankdrainvalvescript :=
    local ← stack(layer_new("flocdrainvalves", blue3), viewtop1)
    for i ∈ 0 .. last(Y_FlocDrainValves)
        insert1 ← insertdwg("VAL-Scaled-Gate-Valve-Threaded", [-L_Sed - T_PlantWall; Y_FlocDrainValves[i]; floc_origin[2]], D_FlocScale, 0 deg)
        local ← stack(local, insert1)
    local ← stack(local, layer_set("0"), layer_freeze("flocdrainvalves"))
    return local  # Iterates through the values of drain locations and inserts a valve
# For this script to work, you need to modify the search path in AutoCAD everytime you want to test this on a different computer.  Go to tools->options the under search directory add a new file path.  Browse to find the Final Desgins Folder (or equivalent on a different sevrer).
Floctankdrainslopescript :=
    local ← stack(layer_new("flocdrainslopes", blue3), viewtop1)
    for i ∈ 0 .. last(Y_FlocDrainValves)
        wedge1 ← wedge3d([-L_Sed; Y_FlocDrainValves[i] + 0.5*D_FlocValve; floc_origin[2]], flocdrainslope_dim + [-L_Sed; Y_FlocDrainValves[i] + 0.5*D_FlocValve; floc_origin[2]])
        local ← stack(local, wedge1)
    local ← stack(local, union_allA)
    local
    local ← stack(local, layer_thaw("floctank"))
    subtract1 ← subtractD(floc_origin, [flocdrainslope_dim[0] - L_Sed; Y_FlocDrainValves[0]; floc_origin[2]])
    local ← stack(local, viewtop1, subtract1, layer_set("0"), layer_freeze("floctank"), layer_freeze("flocdrainslopes"))
    local
# Iterates through all of the drain lcoations and draws a wedge that is as deep as the radius of the valve and as wide as the diameter of the valve, starting at-grade
# Wedges are unioned then subtracted
Floctankendscript :=
    layerset ← layer_set("0")
    return layerset
AC_FlocTank :=
    stack(FlocTankInitialize, Floctanktankscript, Floctankchannelopeningscript, Flocchannelslotscript, Floctankbafflescript, Floctankdrainvalvescript, Floctankdrainslopescript, Floctankdrainadapterscript, Floctankendscript) if EN_FlocHoriz == 1
    stack(FlocTankInitialize, Floctanktankscript, Floctankchannelopeningscript, Flocchannelslotscript, Floctankbafflescript, Floctankbaffleportscript, Floctankdrainvalvescript, Floctankdrainslopescript, Floctankdrainadapterscript, Floctankendscript) otherwise
# [component: inputs AC_FlocTank]
