# Automated Design: AutoCAD: Flocculation Tank
# [reference: MasterProgram.xmcd]
# [reference: Flocculation Energy Dissapation.xmcd]
L_Sed = 10.4348 m
# Dimensions
totalfloc_dim := [
    L_FlocTank/N_FlocChannels;
    (N_FlocChannels*W_FlocChannel) + ((N_FlocChannels - 1)*T_PlantWall);
    H_Floc
]
wall_dim := [totalfloc_dim[0] + (2*T_PlantWall); T_PlantWall; totalfloc_dim[2]]
flocport_dim :=
    for i ∈ 0 .. (N_FlocChannels - 2)
        flocport_dim[0, i] ← [W_FlocPort[N_FlocChannels - 2 - i]; T_PlantWall; (-H_FlocPort)[i]]
    return flocport_dim
H_FlocPort = [1.0619; 1.03329; 0.971571; 0.971571] m
flocport_dim[0, 1] = [0.346449; 0.15; -1.03329] m
channelopening_dim := [W_InletChannel; T_PlantWall; H_InletChannel]
# Origin Points
channelopening_dim = [0.617653; 0.15; 0.717653] m
floc_origin := [Plant_Origin[0]; Plant_Origin[1] + N_SedTanks*(W_Sed + T_PlantWall); Plant_Origin[2]]
totalfloc_dim[2] = 2.11435 m
wall_origin :=
    for i ∈ 0 .. (N_FlocChannels - 2)
        wall_origin[0, i] ← [
            Plant_Origin[0] - totalfloc_dim[0] - T_PlantWall;
            floc_origin[1] + (W_FlocChannel*(1 + i)) + (T_PlantWall*i);
            Plant_Origin[2]
        ]
    return wall_origin
floc_origin[2] = 0 m
-H_FlocPort = [-1.0619; -1.03329; -0.971571; -0.971571] m
H_Floc = 2.11435 m
flocport_origin :=
    for i ∈ 0 .. (N_FlocChannels - 2)
        if mod(i, 2) == 0
            flocport_origin[0, i] ← [
                Plant_Origin[0] - W_FlocPort[N_FlocChannels - 2 - i];
                floc_origin[1] + (W_FlocChannel*(1 + i)) + (T_PlantWall*i);
                floc_origin[2] + H_FlocPort[i]
            ]
        otherwise
            flocport_origin[0, i] ← [
                Plant_Origin[0] - totalfloc_dim[0];
                floc_origin[1] + (W_FlocChannel*(1 + i)) + (T_PlantWall*i);
                floc_origin[2] + H_FlocPort[i]
            ]
    return flocport_origin
flocport_origin = [[-0.658199; 9.63298; 1.0619], [-10.4348; 10.686; 1.03329], [-0.284099; 11.7389; 0.971571]] m
# The flocport origins were set to start at the top height of the ports themselves (added to the origin otherwise it disappears).
flocport_origin = [[-0.658199; 9.63298; 1.0619], [-10.4348; 10.686; 1.03329], [-0.284099; 11.7389; 0.971571]] m
# The x values were negative. I don't understand how the change in the floc code caused this problem.
# The Channel Opening was changed in the z-direction so that the bottom opening aligned with the bottom of the tank.
channelopening_origin := [floc_origin[0] - totalfloc_dim[0]; floc_origin[1] - T_PlantWall; floc_origin[2]]
Y_FlocBaffles :=
    for j ∈ 0 .. (N_FlocChannels - 1)
        Y_FlocBaffles[0, j] ← Plant_Origin[1] + (N_SedTanks*(W_Sed + T_PlantWall)) + ((N_FlocChannels - j - 1)*(W_FlocChannel + T_PlantWall))
    return Y_FlocBaffles
flocport_origin[0, 0] = [-0.658199; 9.63298; 1.0619] m
# Flocculation Tank Script
Floctanktankscript :=
    layer1 ← layer_new("floctank", dkgrey)
    tank1 ← Tank(floc_origin, totalfloc_dim, T_PlantWall)
    layerset1 ← layer_set("0")
    layerfreeze1 ← layer_freeze("floctank")
    one ← stack(layer1, tank1, layerset1, layerfreeze1)
    return one
flocport_origin[0, 1] = [-10.4348; 10.686; 1.03329] m
flocport_origin[0, 2] = [-0.284099; 11.7389; 0.971571] m
Floctankwallscript :=
    local ← layer_new("floctankwall", dkgrey)
    for i ∈ 0 .. (N_FlocChannels - 2)
        local ← stack(local, box(wall_origin[0, i], wall_origin[0, i] + wall_dim), box(flocport_origin[0, i], flocport_origin[0, i] + flocport_dim[0, i]), subtractD(wall_origin[0, i], flocport_origin[0, i]))
        local
    layerset2 ← layer_set("0")
    layerthaw2 ← layer_thaw("floctank")
    bigunion1 ← union_allA
    layerfreeze2 ← layer_freeze("floctankwall")
    layerfreeze3 ← layer_freeze("floctank")
    local ← stack(local, layerset2, layerthaw2, bigunion1, layerset2, layerfreeze2, layerfreeze3)
    return local
Floctankchannelopeningscript :=
    layer3 ← layer_new("flocchannelhole", dkgrey)
    box3 ← box(channelopening_origin, channelopening_origin + channelopening_dim)
    layerset3 ← layer_set("0")
    layerthaw3 ← layer_thaw("floctankwall")
    viewtop ← viewtop1
    subtract3 ← subtractD(floc_origin, [
        floc_origin[0] - totalfloc_dim[0];
        floc_origin[1] - T_PlantWall;
        floc_origin[2] + totalfloc_dim[2] - H_InletChannel
    ])
    bigunion ← union_allA
    layerfreeze3 ← layer_freeze("floctankwall")
    layerfreeze4 ← layer_freeze("flocchannelhole")
    one ← stack(layer3, box3, layerset3, layerthaw3, viewtop, subtract3, bigunion, layerfreeze3, layerfreeze4)
    return ← one
Floctankbafflescript :=
    local ← layer_new("baffle", ltpurple)
    x(j) ←
        a ← 0
        for t ∈ 0 .. (rows(X_FlocBaffles) - 1)
            a ← a + 1 if X_FlocBaffles[t, j] ≠ 0
        return a
    for j ∈ 0 .. (N_FlocChannels - 1)
        for i ∈ 0 .. (x(j) - 1)
            baffle_origin[i] ← [Plant_Origin[0] - L_Sed; 0; Plant_Origin[2]] + [X_FlocBaffles[i, j]; Y_FlocBaffles[0, j]; Z_FlocBaffles[i, j]]
            baffle_length[i] ← L_FlocBaffles[i, j]
            local ← stack(local, lamina(baffle_origin[i], Amp_FlocBaffle, W_FlocChannel, baffle_length[i], T_FlocBaffle, Per_FlocBaffle, AN_FlocBaffle, N_Baffle, N_FlocBaffleCol, X_FlocBaffle, Y_FlocBaffle)) if Baffle_complex == 1
            local ← stack(local, laminaplain1(baffle_origin[i], W_FlocChannel, baffle_length[i], T_FlocBaffle, AN_FlocBaffle, N_Baffle, N_FlocBaffleCol, X_FlocBaffle)) otherwise
            local
        local
    return local
Z_FlocBaffles = [
    0.334099, 0.396449, 0.708199, 0.708199;
    0, 0, 0, 0;
    0.334099, 0.396449, 0.708199, 0.708199;
    0, 0, 0, 0;
    0.334099, 0.396449, 0.708199, 0.708199;
    0, 0, 0, 0;
    0.334099, 0.396449, 0.708199, 0.708199;
    0, 0, 0, 0;
    0.334099, 0.396449, 0.708199, 0.708199;
    0, 0, 0, 0;
    0.334099, 0.396449, 0.708199, 0.708199;
    0, 0, 0, 0;
    0.334099, 0.396449, 0.708199, 0.708199;
    0, 0, 0, 0;
    0.334099, 0.396449, 0, 0;
    0, 0, 0, 0;
    0.334099, 0.396449, 0, 0;
    0, 0, 0, 0;
    0.334099, 0.396449, 0, 0;
    0, 0, 0, 0;
    0.334099, 0.396449, 0, 0;
    0, 0, 0, 0;
    0.334099, 0.396449, 0, 0;
    0, 0, 0, 0;
    0.334099, 0, 0, 0;
    0, 0, 0, 0;
    0.334099, 0, 0, 0
] m
Floctankendscript :=
    layerset ← layer_set("0")
    layerfreeze1 ← layer_freeze("baffle")
    one ← stack(layerset, layerfreeze1)
    return one
AC_FlocTank := stack(Floctanktankscript, Floctankwallscript, Floctankchannelopeningscript, Floctankbafflescript, Floctankendscript)
# [component: inputs AC_FlocTank]
# [component: inputs AC_FlocTank]
