# [reference: MasterProgram.xmcd]
laminaplainscript1(origin, dim, angle, win1, win2, n_baffles, n_bafflecols, xspace) :=
    viewtoplam ← viewtop
    zoom ← zoom_wina(win1, win2)
    box ← boxA(origin, origin + dim)
    rotate ← rotate_3d1(origin, origin, "y", angle)
    array ← arrayB(origin, n_bafflecols, n_baffles, xspace)
    sum ← concat(viewtoplam, box, viewtoplam, array) if angle == 0
    sum ← concat(viewtoplam, box, viewtoplam, rotate, viewtoplam, array) otherwise
laminaplain1(origin, w, l, t, angle, n_baffles, n_bafflecols, xspace) := laminaplainscript1(origin, [t; w; l], 30 - angle/deg, [origin[0] - zc; origin[1] - zc; origin[2] - zc], [origin[0] + t + zc; origin[1] + w + zc; origin[2] + l + zc], n_baffles, n_bafflecols, xspace)
laminarami(origin, w, l, t, angle, n_moduleplates, n_modules, ND_pipe, ND_Space, h_pipeorigin, s_pipes, l_pipe, n_bafflecols, xspace) :=
    layer7 ← layer_new("lamina", purple)
    viewtoplam ← viewtop1
    zoom ← zoom_wina([origin[0] - zc; origin[1] - zc; origin[2] - zc], [origin[0] + t + zc; origin[1] + w + zc; origin[2] + l + zc])
    box ← box(origin, origin + [t; w; l])
    viewright ← viewrightside1
    pipe1 ← Pipe([origin[1] + w/6; origin[2] + h_pipeorigin; origin[0]], ND_pipe, l_pipe, EN_PipeSpec)
    cap1 ← cap1([origin[1] + w/6; origin[2] + h_pipeorigin; origin[0] + l_pipe], innerdiameter(ND_pipe, EN_PipeSpec), EN_PipeSpec)
    viewfront ← viewfront1
    IH_cap ← CapHeight(NominalPipeSize(innerdiameter(ND_pipe, EN_PipeSpec))) - (CapDiameter(NominalPipeSize(innerdiameter(ND_pipe, EN_PipeSpec)))/2 - outerradius(NominalPipeSize(innerdiameter(ND_pipe, EN_PipeSpec))))
    mirror_cap ← concat("_mirror", sp, point([
        origin[0] + l_pipe + IH_cap;
        origin[2] + h_pipeorigin + CapDiameter(NominalPipeSize(innerdiameter(ND_pipe, EN_PipeSpec)))/2;
        origin[1] + w/6
    ]), sp, sp, point([origin[0] + l_pipe/2 + (IH_cap/2); origin[2] + h_pipeorigin]), sp, point([origin[0] + l_pipe/2 + (IH_cap/2); origin[2] + h_pipeorigin + innerdiameter(ND_pipe, EN_PipeSpec)]), sp, "N")
    space1 ← Pipe([origin[1] + w/6; origin[2] + h_pipeorigin; origin[0] + t], ND_Space, xspace*sin(angle) - t, EN_PipeSpec)
    space2 ← Pipe([origin[1] + w/6; origin[2] + h_pipeorigin + s_pipes; origin[0] + t], ND_Space, xspace*sin(angle) - t, EN_PipeSpec)
    array1 ← concat("-array", sp, point([origin[0] + t; origin[2] + h_pipeorigin + outerdiameter(ND_Space)/2; origin[1] + w/6]), sp, point([origin[0] + t; origin[2] + h_pipeorigin + s_pipes; origin[1] + w/6 + outerdiameter(ND_Space)/2]), sp, sp, "R", sp, num2str(n_bafflecols), sp, num2str(n_moduleplates - 1), sp, stringit(xspace*sin(angle)))
    union ← bigunionA([
        origin[0] + l_pipe + zc;
        origin[2] + h_pipeorigin + outerdiameter(ND_Space)/2 + zc;
        origin[1] + w/6
    ], [origin[0] + t + zc; origin[2] + h_pipeorigin - outerdiameter(ND_Space)/2 - zc; origin[1] + w/6], [
        origin[0] + l_pipe + zc;
        origin[2] + h_pipeorigin + outerdiameter(ND_Space)/2 + zc + s_pipes;
        origin[1] + w/6
    ], [
        origin[0] + t + zc;
        origin[2] + h_pipeorigin - outerdiameter(ND_Space)/2 - zc + s_pipes;
        origin[1] + w/6
    ])
    array2 ← arrayB([origin[1] + w/6; origin[2] + h_pipeorigin + innerdiameter(ND_pipe, EN_PipeSpec)/2; origin[0]], 1, 3, w/3)
    rotate ← rotate_3dAll([origin[0]; origin[2]; origin[1]], "z", angle)
    array3 ← arrayB([origin[0]; origin[2]; origin[1]], n_bafflecols, n_moduleplates, xspace)
    block ← block("module", [origin[0]; origin[2]; origin[1]], [origin[0]; origin[2]; origin[1]])
    array4 ← array_all(1, n_modules, n_moduleplates*xspace)
    sum ← stack(viewtoplam, box, viewright, pipe1, cap1, viewfront, mirror_cap, viewright, space1, space2, viewfront, array1, union, viewright, array2, array3, block, array4) if angle == 90
    sum ← stack(viewtoplam, box, viewright, pipe1, cap1, viewfront, mirror_cap, viewright, space1, space2, viewfront, array1, union, viewright, array2, viewfront, rotate, array3, block, array4) otherwise
lamina1 := laminarami(lamina_origin, W_SedPlate, L_SedPlate, T_SedPlate, AN_SedPlate, N_SedModulePlates, N_Modules, ND_SedModulePipe, ND_SedModulePipeSpace, S_SedPlateModuleMin, S_SedModulePipes, L_SedModulePipe, N_SedPlateCol, B_SedPlateHorizontal)
# [component: inputs lamina1]
