# [reference: MasterProgram.xmcd]
lamina1(origin, amp, w, l, t, periods, angle, n_modules, n_moduleplates, ND_pipe, ND_Space, h_pipeorigin, l_pipe, s_pipes, num_bafflecols, xspace, yspace) :=
    origin_pipe1 ← [origin[1] + w/6; origin[2] + h_pipeorigin; origin[0]]
    origin_pipe2 ← [origin_pipe1[0]; origin_pipe1[1] + s_pipes; origin_pipe1[2]]
    lamina[0] ← concat(zoom_wina([origin[0] - w - zc; origin[1]; origin[2]], [origin[0] + w + zc; origin[1] + l + zc; origin[2]]), "spline")
    for i ∈ 0 .. periods*4
        lamina_last ← origin + [sin(π/2*i)*amp; i*w/(periods*4); 0]
        lamina[i + 1] ← point(lamina_last)
    lamina[i + 2] ← concat(sp, point(origin - zc_point))
    lamina[i + 3] ← point(lamina_last + zc_point)
    lamina[i + 4] ← "offset"
    lamina[i + 5] ← stringit(t)
    lamina[i + 6] ← point(origin)
    lamina[i + 7] ← point(origin + [t; 0; 0])
    line[0] ← concat(point(origin), sp, point(origin + [t; 0; 0]))
    line[1] ← concat(point(lamina_last), sp, point(lamina_last + [t; 0; 0]))
    lamina[i + 8] ← concat(sp, "line", sp, line[0], sp)
    lamina[i + 9] ← concat("line", sp, line[1], sp)
    lamina[i + 10] ← concat("z e region w", sp, point(origin - [amp; 0; 0]), sp, point(lamina_last + [t + amp; 0; 0]), sp)
    lamina[i + 11] ← concat("extrude", sp, point(origin), sp, sp, stringit(l), sp, "0")
    lamina[i + 12] ← viewrightside1
    lamina[i + 13] ← Pipe(origin_pipe1, ND_pipe, l_pipe, EN_PipeSpec)
    lamina[i + 14] ← Pipe(origin_pipe2, ND_pipe, l_pipe, EN_PipeSpec)
    lamina[i + 15] ← viewrightside1
    lamina[i + 17] ← concat("-array", sp, point([origin_pipe1[0]; origin_pipe1[1] + innerdiameter(ND_pipe, EN_PipeSpec)/2; origin_pipe1[2]]), sp, point([origin_pipe2[0]; origin_pipe2[1] + innerdiameter(ND_pipe, EN_PipeSpec)/2; origin_pipe1[2]]), sp, sp, "R", sp, "1", sp, "3", sp, stringit(w/3))
    s_plates ← xspace*sin(angle) - t
    lamina[i + 18] ← Pipe([origin[1] + w/6; origin[2] + h_pipeorigin; origin[0] + t], ND_Space, s_plates, EN_PipeSpec)
    lamina[i + 19] ← Pipe([origin_pipe1[0]; origin_pipe1[1] + s_pipes; origin_pipe1[2] + t], ND_Space, s_plates, EN_PipeSpec)
    lamina[i + 20] ← viewfront1
    lamina[i + 21] ← concat("-array", sp, point([origin_pipe1[2] + t; origin_pipe1[1] + outerdiameter(ND_Space)/2; origin_pipe1[0]]), sp, point([origin_pipe2[2] + t; origin_pipe2[1]; origin_pipe2[0] + outerdiameter(ND_Space)/2]), sp, sp, "R", sp, "1", sp, num2str(n_moduleplates - 1), sp, stringit(xspace*sin(angle)))
    lamina[i + 22] ← concat("rotate3d", sp, "all", sp, sp, "z", sp, point([origin[0]; origin[2]; origin[1]]), sp, num2str(90 - angle/deg)) if angle ≠ 90 deg
    lamina[i + 23] ← concat("-array", sp, point([origin[0]; origin[2]; origin[1]]), sp, sp, "R", sp, num2str(num_bafflecols), sp, num2str(n_moduleplates), sp)
    lamina[i + 24] ← concat(stringit(xspace)) if n_moduleplates > 1
    lamina[i + 24] ← "" otherwise
    lamina[i + 25] ← concat(stringit(yspace)) if num_bafflecols > 1
    lamina[i + 26] ← concat("-block", sp, "module")
    lamina[i + 27] ← concat(point([origin[0]; origin[2]; origin[1]]), sp, "all", sp)
    lamina[i + 28] ← concat("-insert", sp, "module")
    lamina[i + 29] ← concat(point([origin[0]; origin[2]; origin[1]]), sp, sp, sp)
    lamina[i + 30] ← concat("-array", sp, "all", sp, sp, "R", sp, "1", sp, num2str(n_modules), sp, stringit(n_moduleplates*xspace))
    lamina[i + 31] ← " z e"
    lamina
laminaplainscript(origin, w, l, t, angle, n_modules, n_moduleplates, ND_pipe, ND_Space, h_pipeorigin, l_pipe, s_pipes, num_bafflecols, xspace) := lamina1(origin, 0, w, l, t, 0, angle, n_modules, n_moduleplates, ND_pipe, ND_Space, h_pipeorigin, l_pipe, s_pipes, num_bafflecols, xspace, 0)
laminar := laminaplainscript(lamina_origin, W_Sed, L_SedPlate, T_SedPlate, AN_SedPlate, N_Modules, N_SedModulePlates, ND_SedModulePipe, ND_SedModulePipeSpace, S_SedPlateModuleMin, L_SedModulePipe, S_SedModulePipes, N_SedPlateCol, B_SedPlateHorizontal)  # error: Divide by zero.
# [component: inputs laminar]
