# Automated Entrance Tank Code
# [reference: MasterProgram.xmcd]
# [reference: new entrance tank.xmcd]
S_Walkway := 1.5 m
Et_Origin := [
    Plant_Origin[0] + T_PlantWall;
    Plant_Origin[1] + N_SedTanks*(W_Sed + T_PlantWall) + (N_FlocChannels*(W_FlocChannel + T_PlantWall)) + S_Walkway + CouplingLength(ND_RMPipe) + ElbowRadius(ND_RMPipe) + ShortTeeLength(ND_RMPipe);
    Z_Et
] = [0.15; 9.71022; 0.940079] m
L_RMPipeHorizLower := Et_Origin[1] - floc_origin[1] - N_FlocChannels*(T_PlantWall + W_FlocChannel) - ElbowRadius(ND_RMPipe) - ShortTeeLength(ND_RMPipe) + 2*SocketDepth(ND_RMPipe) - ConRadius(ND_RMPipe) - S_Elbow - T_PlantWall
L_RMPipeVertLower := Z_EtExit - ShortTeeLength(ND_RMPipe) - FlocCoupling_Origin[2] - ElbowRadius(ND_RMPipe)
L_RMPipeVertPipeUpper := ZW_RMPipe - Z_EtExit  # should overestimate the needed length of this pipe
L_CdcLever := 0.45 m  # assumed from Drew's drawing for now
L_EtExitInner := W_Et/2 - ElbowRadius(ND_RMPipe) + T_PlantWall
# might need to add a constraint to lever arm length to ensure
# that the float isn't obstructed by the hopper in the min flow
# situation
L_EtWeir := ZW_Et - (Et_Origin[2] + ConRadius(ND_EtOverflow)*tan(AN_EtSlope)) + SocketDepth(ND_EtOverflow)
L_EtDrainPipe :=
    (ConRadius(ND_RMPipe)*tan(AN_EtSlope) - CouplingLength(ND_RMPipe) + SocketDepth(ND_RMPipe) - T_PlantWall) if ConRadius(ND_RMPipe)*tan(AN_EtSlope) < CouplingLength(ND_RMPipe) + T_PlantWall
    2*SocketDepth(ND_RMPipe)
L_EtVertDrainPipes :=
    for i ∈ 0 .. N_EtHoppers - 2
        L[i] ←
            (2*SocketDepth(ND_EtDrain) + ElbowRadius(ND_EtDrain) - ShortTeeLength(ND_EtDrain)) if (CouplingLength(ND_EtDrain) ≥ T_PlantWall)
            (T_PlantWall - CouplingLength(ND_EtDrain) + 2*SocketDepth(ND_EtDrain) + ElbowRadius(ND_EtDrain) - ShortTeeLength(ND_EtDrain)) otherwise
    L[N_EtHoppers - 1] ←
        (2*SocketDepth(ND_EtDrain)) if (CouplingLength(ND_EtDrain) ≥ T_PlantWall)
        (T_PlantWall - CouplingLength(ND_EtDrain) + 2*SocketDepth(ND_EtDrain)) otherwise
    return L
L_EtHorizDrainPipes :=
    L[0] ←
        (L_EtHopper - ElbowRadius(ND_EtDrain) - ShortTeeLength(ND_EtDrain) + 2*T_ConcreteMin) if N_EtHoppers == 2
        (L_EtHopper - ElbowRadius(ND_EtDrain) - ShortTeeLength(ND_EtDrain)) otherwise
    if N_EtHoppers ≥ 4
        for i ∈ 1 .. N_EtHoppers - 3
            L[i] ← L_EtHopper - TeeLength(ND_EtDrain)
    L[{
        (N_EtHoppers - 2) if N_EtHoppers ≥ 4
        1 otherwise
    }] ← L_EtHopper - TeeLength(ND_EtDrain) + 2*T_ConcreteMin
    L[{
        (N_EtHoppers - 1) if N_EtHoppers == 3
        2 otherwise
    }] ← 1/2*L_EtHopper + T_PlantWall
    return L
# I will assume we will always have at least 2 hoppers.
L_RMPipeVertPipeUpper := ZW_RMPipe - Z_EtExit  # should overestimate the needed length of this pipe
# Origin Points
EtDrainElbow_Origin := ([
    -L_Et + L_EtHopper/2;
    ConRadius(ND_EtDrain) + S_Fitting;
    SocketDepth(ND_EtDrain) - CouplingLength(ND_EtDrain)
] + Et_Origin - [
    0 m;
    0 m;
    {
        (2*SocketDepth(ND_EtDrain)) if (CouplingLength(ND_EtDrain) ≥ T_PlantWall)
        (T_PlantWall - CouplingLength(ND_EtDrain) + 2*SocketDepth(ND_EtDrain)) otherwise
    }
])
# don't forget micromix plate!!!
ND_EtFloat = 0.1524 m
S_EtFloat = 0.1 m
# x is the width
# y is the length
# z is the height
L_Et = 4.08288 m
Z_EtTop = 2.3943 m
Et_Dim := [L_Et; W_Et; Z_EtTop - Z_Et] = [4.08288; 0.45; 1.45422] m
EtHopper_Origin := [Et_Origin[0]; Et_Origin[1] + W_Et; Et_Origin[2]] = [0.15; 10.1602; 0.940079] m
EtHopper3_Origin := [Et_Origin[0] - L_EtHopper; Et_Origin[1] + W_Et; Et_Origin[2]] = [-1.17763; 10.1602; 0.940079] m
# Right side of 1st hopper
Hopper1_Farcorner := [Et_Origin[0] - 1/2*L_EtHopper + ConRadius(ND_EtDrain) + S_Fitting; Et_Origin[1]; Z_EtHopper] = [-0.410473; 9.71022; 2.08984] m
Hopper2_Farcorner := [
    Et_Origin[0] - W_Et + 2*(ConRadius(ND_EtDrain) + S_Fitting);
    Et_Origin[1] + W_Et + L_EtHopper;
    Z_EtHopper
] = [-0.09332; 11.4879; 2.08984] m  # backside  of 1st hopper
# Left side of 1st hopper
Hopper3_Farcorner := [Et_Origin[0] - 1/2*L_EtHopper - ConRadius(ND_EtDrain) - S_Fitting; Et_Origin[1]; Z_EtHopper] = [-0.617153; 9.71022; 2.08984] m
EtHopper_CopyPoints :=
    for i ∈ 0 .. N_EtHoppers - 2
        Et_Hopper.Array[i] ← [Et_Origin[0] - 2*T_ConcreteMin - (i + 1)*L_EtHopper; Et_Origin[1]; Et_Origin[2]]
    return Et_Hopper.Array
RMElbow1_Origin := [FlocCoupling_Origin[0]; Et_Origin[1] + 1/2*W_Et - ElbowRadius(ND_RMPipe); Z_EtExit]  # this is the upper elbow (connected to the LFOM)
L_RMExitPipe :=
    (1/2*W_Et + T_PlantWall - ElbowRadius(ND_RMPipe) + SocketDepth(ND_RMPipe)) if ElbowRadius(ND_RMPipe) ≥ 1/2*W_Et
    (1/2*W_Et + T_PlantWall - CouplingLength(ND_RMPipe) + SocketDepth(ND_RMPipe)) if CouplingLength(ND_RMPipe) < T_PlantWall
    (2*SocketDepth(ND_RMPipe)) otherwise
RMExitCoupling_Origin := [0 m; -L_RMExitPipe + SocketDepth(ND_RMPipe); 0 m] + RMElbow1_Origin
# only use a coupling if ElbowRadius <= 1/2 W.Et
# flush with inner wall if CouplingLength > T.PlantWall
# flush with outer wall otherwise
L_RMPipeExit2 :=
    (T_PlantWall + SocketDepth(ND_RMPipe) - CouplingLength(ND_RMPipe)) if (CouplingLength(ND_RMPipe) < T_PlantWall)
    (2*SocketDepth(ND_RMPipe)) otherwise  # only need this second pipe if there is a coupling
.
RMTee_Origin := [
    RMElbow1_Origin[0];
    {
        (RMElbow1_Origin[1] - L_RMExitPipe - CouplingLength(ND_RMPipe)) if ElbowRadius(ND_RMPipe) ≤ 1/2*W_Et
        (RMElbow1_Origin[1] - L_RMExitPipe) otherwise
    };
    RMElbow1_Origin[2]
]
RMElbow2_Origin := [
    FlocCoupling_Origin[0];
    RMTee_Origin[1] - ShortTeeLength(ND_RMPipe) - ElbowRadius(ND_RMPipe);
    FlocCoupling_Origin[2]
]  # this is the lower elbow
L_RMPipeVert := RMElbow1_Origin[2] - ShortTeeLength(ND_RMPipe) - FlocCoupling_Origin[2] - ElbowRadius(ND_RMPipe)
L_RMFlocPipe := RMElbow2_Origin[1] - FlocCoupling_Origin[1] - CouplingLength(ND_RMPipe) + SocketDepth(ND_RMPipe)
ElbowRadius(ND_RMPipe) ≤ 1/2*W_Et = 0
# Scripts
EtTankScript :=
    EntTankLayer ← layer_new("EntranceTank", ltgrey)
    EntTank ← Tank(Et_Origin, Et_Dim, T_PlantWall)
    FreezeEntTank ← FreezeLayer("EntranceTank")
    HopperLayer ← layer_new("EtHopper", blue)
    Hopper1 ← WedgeF(EtHopper_Origin, Hopper1_Farcorner, [0; 0; 0]*deg)
    Hopper2 ← WedgeF(EtHopper_Origin, Hopper2_Farcorner, [90; 0; 0]*deg)
    Hopper3 ← WedgeF(EtHopper3_Origin, Hopper3_Farcorner, [0; 0; 0]*deg)
    UnionHopper ← union_allA
    GroupHopper ← GroupAll("EtHopper")
    CopyEtHopper ← CopyGroup("EtHopper", Et_Origin, EtHopper_CopyPoints)
    Ledge ← BoxF(EtHopper3_Origin, EtHopper3_Origin - [2*T_ConcreteMin; W_Et; -H_EtHopper], [0; 0; 0]*deg)
    FreezeHopper ← FreezeLayer("EtHopper")
    return stack(EntTankLayer, EntTank, FreezeEntTank, HopperLayer, Hopper1, Hopper2, Hopper3, UnionHopper, GroupHopper, CopyEtHopper, Ledge, FreezeHopper)
RMScript :=
    ElbowLayer ← layer_new("RMElbow", green)
    UpperElbow ← ElbowSUBF(RMElbow1_Origin, [0; 90; 0]*deg, ND_RMPipe, EN_PipeSpec, ["EntranceTank"; "EtHopper"])
    LowerElbow ← ElbowF(RMElbow2_Origin, [0; 90; 0]*deg, ND_RMPipe, EN_PipeSpec)
    FreezeElbows ← FreezeLayer("RMElbow")
    PipeLayer ← layer_new("RMPipe", blue)
    ExitPipe ← PipeSUBF(RMElbow1_Origin, L_RMExitPipe, [90; 0]*deg, ND_RMPipe, EN_PipeSpec, ["EntranceTank"; "EtHopper"])
    RMPipeVert ← PipeF(RMTee_Origin + [0 m; -ShortTeeLength(ND_RMPipe); -ShortTeeLength(ND_RMPipe)], L_RMPipeVert, [0; 270]*deg, ND_RMPipe, EN_PipeSpec)
    RMFlocPipe ← PipeF(RMElbow2_Origin, L_RMFlocPipe, [90; 0]*deg, ND_RMPipe, EN_PipeSpec)
    FreezePipe ← FreezeLayer("RMPipe")
    RMTeeLayer ← layer_new("RMTee", green)
    MakeTee ← TeeF(RMTee_Origin, [0; 90; 0]*deg, ND_RMPipe, EN_PipeSpec)
    FreezeTee ← FreezeLayer("RMTee")
    return stack(ElbowLayer, UpperElbow, LowerElbow, FreezeElbows, PipeLayer, ExitPipe, RMPipeVert, RMFlocPipe, FreezePipe, RMTeeLayer, MakeTee, FreezeTee)
EtDrainsRight :=
    CouplingLayer ← layer_new("EtDrainCouplings", green)
    MakeCoupling ← CouplingSUBF([-L_EtHopper/2; ConRadius(ND_EtDrain) + S_Fitting; -SocketDepth(ND_EtDrain)] + Et_Origin, [0; 270]*deg, ND_EtDrain, EN_PipeSpec, ["EntranceTank"])
    Local ← stack(CouplingLayer, MakeCoupling)
    for i ∈ 1 .. N_EtHoppers - 1
        Local ← stack(Local, CouplingSUBF([
            -L_EtHopper/2 - L_EtHopper*i - 2*T_ConcreteMin;
            ConRadius(ND_EtDrain) + S_Elbow;
            -SocketDepth(ND_EtDrain)
        ] + Et_Origin, [0; 270]*deg, ND_EtDrain, EN_PipeSpec, ["EntranceTank"]))
    FreezeCoupling ← FreezeLayer("EtDrainCouplings")
    ElbowLayer ← layer_new("EtDrainElbow", green)
    MakeElbow ← ElbowF(EtDrainElbow_Origin, [180; 0; 90]*deg, ND_EtDrain, EN_PipeSpec)
    FreezeElbow ← FreezeLayer("EtDrainElbow")
    PipeLayer ← layer_new("EtDrainPipes", blue)
    FirstVertPipe ← PipeSUBF([
        -L_EtHopper/2;
        ConRadius(ND_EtDrain) + S_Fitting;
        SocketDepth(ND_EtDrain) - CouplingLength(ND_EtDrain)
    ] + Et_Origin, L_EtVertDrainPipes[0], [0; 270]*deg, ND_EtDrain, EN_PipeSpec, ["EntranceTank"])
    Local2 ← stack(FreezeCoupling, ElbowLayer, MakeElbow, FreezeElbow, PipeLayer, FirstVertPipe)
    for i ∈ 1 .. N_EtHoppers - 1
        Local2 ← stack(Local2, PipeSUBF([
            -L_EtHopper/2 - L_EtHopper*i - 2*T_ConcreteMin;
            ConRadius(ND_EtDrain) + S_Fitting;
            SocketDepth(ND_EtDrain) - CouplingLength(ND_EtDrain)
        ] + Et_Origin, L_EtVertDrainPipes[i], [0; 270]*deg, ND_EtDrain, EN_PipeSpec, ["EntranceTank"]))
    FirstHorizPipe ← PipeF([
        EtDrainElbow_Origin[0] + ElbowRadius(ND_EtDrain) + L_EtHorizDrainPipes[0];
        Et_Origin[1] + (ConRadius(ND_EtDrain) + S_Elbow);
        Et_Origin[2] + {
            -CouplingLength(ND_EtDrain) - SocketDepth(ND_EtDrain) if CouplingLength(ND_EtDrain) - ElbowRadius(ND_EtDrain) ≥ T_PlantWall
            -T_PlantWall - SocketDepth(ND_EtDrain) - ElbowRadius(ND_EtDrain) otherwise
        }
    ], L_EtHorizDrainPipes[0], [0; 0]*deg, ND_EtDrain, EN_PipeSpec)
    LastHorizPipe1 ← PipeF([
        EtDrainElbow_Origin[0] + ShortTeeLength(ND_EtDrain) + L_EtHopper*{
            (N_EtHoppers - 2) if N_EtHoppers ≥ 4
            1 otherwise
        } + L_EtHorizDrainPipes[last(L_EtHorizDrainPipes) - 1];
        Et_Origin[1] + (ConRadius(ND_EtDrain) + S_Elbow);
        Et_Origin[2] + {
            -CouplingLength(ND_EtDrain) - SocketDepth(ND_EtDrain) if CouplingLength(ND_EtDrain) - ElbowRadius(ND_EtDrain) ≥ T_PlantWall
            -T_PlantWall - SocketDepth(ND_EtDrain) - ElbowRadius(ND_EtDrain) otherwise
        }
    ], L_EtHorizDrainPipes[last(L_EtHorizDrainPipes) - 1], [0; 0]*deg, ND_EtDrain, EN_PipeSpec)
    LastHorizPipe2 ← PipeF([
        EtDrainElbow_Origin[0] + 2*T_ConcreteMin + ShortTeeLength(ND_EtDrain) + L_EtHopper*{
            (N_EtHoppers - 1) if N_EtHoppers ≥ 4
            2 if N_EtHoppers == 3
            1 otherwise
        } + L_EtHorizDrainPipes[last(L_EtHorizDrainPipes)];
        Et_Origin[1] + (ConRadius(ND_EtDrain) + S_Elbow);
        Et_Origin[2] + {
            -CouplingLength(ND_EtDrain) - SocketDepth(ND_EtDrain) if CouplingLength(ND_EtDrain) - ElbowRadius(ND_EtDrain) ≥ T_PlantWall
            -T_PlantWall - SocketDepth(ND_EtDrain) - ElbowRadius(ND_EtDrain) otherwise
        }
    ], L_EtHorizDrainPipes[i], [0; 0]*deg, ND_EtDrain, EN_PipeSpec)
    Local3 ←
        stack(FirstHorizPipe, LastHorizPipe1) if N_EtHoppers == 2
        stack(FirstHorizPipe, LastHorizPipe1, LastHorizPipe2) otherwise
    for i ∈ 1 .. N_EtHoppers - 2
        if N_EtHoppers ≥ 4
            Local3 ← stack(Local2, PipeF([
                EtDrainElbow_Origin[0] + L_EtHorizDrainPipes*i + ShortTeeLength(ND_EtDrain);
                Et_Origin[1] + (ConRadius(ND_EtDrain) + S_Elbow);
                Et_Origin[2] + {
                    -CouplingLength(ND_EtDrain) - SocketDepth(ND_EtDrain) if CouplingLength(ND_EtDrain) - ElbowRadius(ND_EtDrain) ≥ T_PlantWall
                    -T_PlantWall - SocketDepth(ND_EtDrain) - ElbowRadius(ND_EtDrain) otherwise
                }
            ], L_EtHorizDrainPipes[i], [0; 0]*deg, ND_EtDrain, EN_PipeSpec))
    FreezePipes ← FreezeLayer("EtDrainPipes")
    Local4 ← stack(layer_new("EtDrainTees", green), TeeF([
        Et_Origin[0] - 1/2*L_EtHopper;
        EtDrainElbow_Origin[1];
        EtDrainElbow_Origin[2] + ShortTeeLength(ND_EtDrain) - ElbowRadius(ND_EtDrain)
    ], [0; 0; 90]*deg, ND_EtDrain, EN_PipeSpec))
    Local4 ←
        stack(Local4, TeeF(EtDrainElbow_Origin + [L_EtHopper*1; 0 m; ShortTeeLength(ND_EtDrain) - ElbowRadius(ND_EtDrain)], [0; 0; 90]*deg, ND_EtDrain, EN_PipeSpec)) if N_EtHoppers == 3
        otherwise
            for i ∈ 1 .. N_EtHoppers - 3
                Local4 ← stack(Local4, TeeF(EtDrainElbow_Origin + [L_EtHopper*i; 0 m; ShortTeeLength(ND_EtDrain) - ElbowRadius(ND_EtDrain)], [0; 0; 90]*deg, ND_EtDrain, EN_PipeSpec))
    FreezeTees ← FreezeLayer("EtDrainTees")
    return stack(Local, Local2, Local3, FreezePipes, Local4, FreezeTees)
EtWeir :=
    ElbowLayer ← layer_new("EtWeirElbow", green)
    DrawElbow ← ElbowSUBF([
        Et_Origin[0] - ElbowRadius(ND_EtOverflow);
        Et_Origin[1] + 1/2*W_Et;
        Z_EtTop - H_PlantFreeboard - SocketDepth(ND_EtOverflow)
    ], [180; 0; 90]*deg, ND_EtOverflow, EN_PipeSpec, ["EntranceTank"; "EtHopper"])
    FreezeElbow ← FreezeLayer("EtWeirElbow")
    PipeLayer ← layer_new("EtWeirDrainPipe", blue)
    DrawPipe ← PipeSUBF([
        Et_Origin[0] + T_PlantWall + 2*SocketDepth(ND_EtOverflow);
        Et_Origin[1] + 1/2*W_Et;
        Z_EtTop - H_PlantFreeboard - ElbowRadius(ND_EtOverflow) - SocketDepth(ND_EtOverflow)
    ], T_PlantWall + 2*SocketDepth(ND_EtOverflow), [0; 0]*deg, ND_EtOverflow, EN_PipeSpec, ["EntranceTank"; "EtHopper"])
    FreezePipe ← FreezeLayer("EtWeirDrainPipe")
    return stack(ElbowLayer, DrawElbow, FreezeElbow, PipeLayer, DrawPipe, FreezePipe)
EtDrainsLeft :=
    if EN_PlantDrains == 0
        ThawTank ← layer_thaw("EntranceTank")
        ThawHopper ← layer_thaw("EtHopper")
        ThawCouplings ← layer_thaw("EtDrainCouplings")
        ThawElbows ← layer_thaw("EtDrainElbow")
        ThawTees ← layer_thaw("EtDrainPipes")
        ThawPipes ← layer_thaw("EtDrainTees")
        ThawRMPipe ← layer_thaw("RMPipe")
        ThawRMElbow ← layer_thaw("RMElbow")
        ThawRMTee ← layer_thaw("RMTee")
        ThawWeirElbow ← layer_thaw("EtWeirElbow")
        ThawWeirPipe ← layer_thaw("EtWeirDrainPipe")
        StackThaws ← stack(ThawTank, ThawHopper, ThawCouplings, ThawElbows, ThawTees, ThawPipes, ThawRMPipe, ThawRMElbow, ThawRMTee, ThawWeirElbow, ThawWeirPipe)
        Mirror ← Mirror3dAll("YZ", [floc_origin[0] - 1/2*L_Sed; 0 m; 0 m], "Y")
        FreezeTank ← layer_freeze("EntranceTank")
        FreezeHopper ← layer_freeze("EtHopper")
        FreezeCouplings ← layer_freeze("EtDrainCouplings")
        FreezeElbows ← layer_freeze("EtDrainElbow")
        FreezeTees ← layer_freeze("EtDrainPipes")
        FreezePipes ← layer_freeze("EtDrainTees")
        FreezeRMPipe ← layer_freeze("RMPipe")
        FreezeRMTee ← layer_freeze("RMTee")
        FreezeRMElbow ← layer_freeze("RMElbow")
        FreezeWeirElbow ← layer_freeze("EtWeirElbow")
        FreezeWeirPipe ← layer_freeze("EtWeirDrainPipe")
        StackFreezes ← stack(FreezeTank, FreezeHopper, FreezeCouplings, FreezeElbows, FreezeTees, FreezePipes, FreezeRMPipe, FreezeRMTee, FreezeRMElbow, FreezeWeirElbow, FreezeWeirPipe)
    return stack(StackThaws, Mirror, StackFreezes)
AC_EntranceTank :=
    stack(EtTankScript, EtWeir, RMScript, EtDrainsRight) if EN_PlantDrains == 1
    stack(EtTankScript, EtWeir, RMScript, EtDrainsRight, EtDrainsLeft) if EN_PlantDrains == 0
# [component: inputs AC_EntranceTank]
