# [reference: MasterProgram.xmcd]
T_LaunderCap := outerradius(ND_SedLaunder) - innerdiameter(ND_SedLaunder, EN_PipeSpec)/2
L_SedLaunder :=
    (L_Sed - W_InletChannel - W_ExitChannel - T_ChannelWall - CouplingLength(ND_SedLaunder) - CouplingLengthFlex(ND_SedLaunder) + SocketDepthFlex(ND_SedLaunder)) - T_LaunderCap if CouplingLength(ND_SedLaunder) ≥ T_ChannelWall
    (L_Sed - W_InletChannel - W_ExitChannel - 2*T_ChannelWall - CouplingLengthFlex(ND_SedLaunder) + SocketDepthFlex(ND_SedLaunder)) - T_LaunderCap otherwise
# [component: inputs SedLaunderscript]
PVCCouplingNew_origin := [
    Plant_Origin[0] - W_ExitChannel - SocketDepth(ND_SedLaunder);
    Plant_Origin[1] + W_Sed/(N_SedLaunders*N_SedBays*2);
    Plant_Origin[2] + HW_Sed - H_SedAbove + outerradius(ND_SedLaunder)
]
FlexCouplingNew_origin := [
    {
        (Plant_Origin[0] - W_ExitChannel - CouplingLength(ND_SedLaunder)) if CouplingLength(ND_SedLaunder) ≥ T_PlantWall
        Plant_Origin[0] otherwise
    };
    Plant_Origin[1] + W_Sed/(N_SedLaunders*N_SedBays*2);
    Plant_Origin[2] + HW_Sed - H_SedAbove + outerradius(ND_SedLaunder)
]
SedLaunderNippleNew_origin := [
    PVCCouplingNew_origin[0] - CouplingLength(ND_SedLaunder) + SocketDepth(ND_SedLaunder);
    Plant_Origin[1] + W_Sed/(N_SedLaunders*N_SedBays*2);
    Plant_Origin[2] + HW_Sed - H_SedAbove + outerradius(ND_SedLaunder)
]
SedLaunderNew_origin := [
    FlexCouplingNew_origin[0] - SocketDepthFlex(ND_SedLaunder);
    Plant_Origin[1] + W_Sed/(N_SedLaunders*N_SedBays*2);
    Plant_Origin[2] + HW_Sed - H_SedAbove + outerradius(ND_SedLaunder)
]
LaunderCapNew_origin := [
    SedLaunderNew_origin[0] - L_SedLaunder;
    Plant_Origin[1] + W_Sed/(N_SedLaunders*N_SedBays*2);
    Plant_Origin[2] + HW_Sed - H_SedAbove + outerradius(ND_SedLaunder)
]
LengthSedLaunderNipple :=
    (SocketDepth(ND_SedLaunder) + SocketDepthFlex(ND_SedLaunder)) if CouplingLength(ND_SedLaunder) ≥ T_PlantWall
    (SocketDepth(ND_SedLaunder) + SocketDepthFlex(ND_SedLaunder) + (T_PlantWall - CouplingLength(ND_SedLaunder))) otherwise
T_PVCCoupling := T_LaunderCap
SedLaunderScriptNEW :=
    LayerNew1 ← layer_new("launder", pastelgreen)
    LaunderPipe ← PipeF(SedLaunderNew_origin, L_SedLaunder, [0 deg; 0 deg], ND_SedLaunder, EN_PipeSpec)
    FreezeLaunder ← FreezeLayer("launder")
    Orifice ← cylinderD([
        SedLaunderNew_origin[0];
        SedLaunderNew_origin[1];
        SedLaunderNew_origin[2] + L_SedActive - B_SedLaunderOrifices/2
    ], D_SedLaunderOrifice/2, [
        SedLaunderNew_origin[0];
        SedLaunderNew_origin[1] + outerradius(ND_SedLaunder) + zc;
        SedLaunderNew_origin[2] + L_SedActive - B_SedLaunderOrifices/2
    ])
    ViewRightSide ← viewrightside1
    OrificeArray ← arrayB([
        SedLaunderNew_origin[1] + outerradius(ND_SedLaunder) + zc;
        SedLaunderNew_origin[2] + L_SedActive - B_SedLaunderOrifices/2;
        SedLaunderNew_origin[0]
    ], N_SedLaunderOrificesRow, 1, -B_SedLaunderOrifices)
    ThawLaunder ← SelectLayer("launder")
    FreezeLaunderAgain ← FreezeLayer("launder")
    SubtractOrifice ← subtractH([SedLaunderNew_origin[0]; SedLaunderNew_origin[1] - outerradius(ND_SedLaunder)], [
        SedLaunderNew_origin[0] + D_SedLaunderOrifice + zc;
        SedLaunderNew_origin[1] + outerradius(ND_SedLaunder) + 2*zc
    ], [SedLaunderNew_origin[0] - D_SedLaunderOrifice - zc; SedLaunderNew_origin[1] - zc])
    LayerNew2 ← layer_new("PVCCoupling", turquoise)
    PVCCoupling ← CouplingSUBF(PVCCouplingNew_origin, [0 deg; 0 deg], ND_SedLaunder, EN_PipeSpec, ["tank"])
    FreezePVCCoupling ← FreezeLayer("PVCCoupling")
    LayerNew3 ← layer_new("SedLaunderNipple", red)
    SedLaunderNipple ←
        PipeF(SedLaunderNippleNew_origin, LengthSedLaunderNipple, [0 deg; 0 deg], ND_SedLaunder, EN_PipeSpec) if CouplingLength(ND_SedLaunder) ≥ T_ChannelWall
        PipeSUBF(SedLaunderNippleNew_origin, LengthSedLaunderNipple, [0 deg; 0 deg], ND_SedLaunder, EN_PipeSpec, ["tank"]) otherwise
    FreezeSedLaunderNipple ← FreezeLayer("SedLaunderNipple")
    LayerNew4 ← layer_new("FlexCoupling", pastelyellow)
    FlexCoupling ← FlexCouplingF(FlexCouplingNew_origin, [0 deg; 0 deg], ND_SedLaunder)
    FreezeFlexCoupling ← FreezeLayer("FlexCoupling")
    LayerNew5 ← layer_new("LaunderCap", yellow)
    LaunderCap ← CapF(LaunderCapNew_origin, [0 deg; 180 deg], ND_SedLaunder)
    FreezeLaunderCap ← FreezeLayer("LaunderCap")
    StackEverything ← stack(LayerNew1, LaunderPipe, FreezeLaunder, Orifice, ViewRightSide, OrificeArray, ThawLaunder, FreezeLaunderAgain, SubtractOrifice, LayerNew2, PVCCoupling, FreezePVCCoupling, LayerNew3, SedLaunderNipple, FreezeSedLaunderNipple, LayerNew4, FlexCoupling, FreezeFlexCoupling, LayerNew5, LaunderCap, FreezeLaunderCap)
    return StackEverything
PipeSUBF(OriginPoint, Length, AngleVector, ND, EN, SubtractionLayers)
# [component: inputs SedLaunderScriptNEW]
SedLaunderScriptNEW = [
    "-layer m launder"; "c t 212,255,170"; "launder"; "  "; "_cylinder -0.87237,0.53,1.59518 0.10954 c -12.49807,0.53,1.59518"; "_cylinder -0.86237,0.53,1.59518 0.1006 c -12.50807,0.53,1.59518"; "_zoom w -12.50807,0.41046,1.59518 -12.48807,0.64954,1.59518"; "_subtract -12.49807,0.63954,1.59518  -12.50807,0.6306,1.59518 "; "-group c launder y "; "all "
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]
