# Overall Plant Inputs
# Only parameters with units need to be entered in this file. The units must be attached as SI (meters, kg, s)
Q_Plant := Q_Plant*m^3/s
acad_version := 2008
H_PlantFreeboard := H_PlantFreeboard*m
T_PlantWall := T_PlantWall*m
EN_PipeSpec := EN_PipeSeries
EN_DrillSeries := EN_DrillSeries
EN_FcmTube := EN_TubeSeries
# Chemical Storage Tanks, Entrance Tank
# and Rapid Mixer Inputs
C_FcmDoseMax := C_AlumDoseMax*kg/m^3
C_FcmAlum := C_AlumStock*kg/m^3
Ti_StockMin := Ti_AlumStock*s
# Flocculator Inputs
T_FlocBaffle := T_FlocBaffle*m
Ti_FlocDrain := Ti_FlocDrain*s
W_FlocChannelMin := W_FlocChannelMin*m
H_FlocOption := H_FlocOption
# Sedimentation Inputs
N_SedTanks := N_SedTanks
W_SedBay := W_SedPlateSheet*m
L_SedPlateSheet := L_SedPlateSheet*m
T_SedPlate := T_SedPlate*m
ND_SedPlateFrame := round(ND_SedPlateFrame*m/in)*in  # This needs to be an exact inch otherwise the outerdiameter function call to the pipe database won't work
Ti_SludgeDrain := Ti_SludgeDrain*s
# Expert Inputs
W_MpWalkway := 1*m
N_SedBaysEst := N_SedBaysEst
L_FlocBaffleSlot := L_FlocBaffleSlot*m
S_FlocChannel := S_FlocChannel*m
B_SedPlateFramePipes := B_SedPlateFramePipes*m
CP_Floc := CP_Floc*m^(2/3)
Pi_FlocDissipation := 2
S_FlocPort := S_FlocPort*m
Pi_FlocBaffle := Pi_FlocBaffle
ED_Floc := ED_Floc*W/kg
HW_SedEst := 2 m
ED_SedInlet := ED_SedInlet*W/kg
Pi_FlowManifold := Pi_FlowManifold
V_SedUpBod := V_SedUpBod*m/s
V_SedCBod := V_SedCBod*m/s
HW_SedEst := 2 m
ED_SedInlet := ED_SedInlet*W/kg
Pi_FlowManifold := Pi_FlowManifold
V_SedUpBod := V_SedUpBod*m/s
V_SedCBod := V_SedCBod*m/s
W_SedSludgeOverlap := W_SedSludgeOverlap*m
AN_SedPlate := AN_SedPlate*rad
B_SedPlateMin := S_SedPlateMin*m + T_SedPlate
N_SedLaunders := N_SedLaunders
Pi_Launder := Pi_FlowLaunder
HL_SedLaunderBod := HL_SedLaunderBod*m
Pi_QLaunderOrifices := Pi_FlowLaunder
B_SedLaunderOrifices := B_SedLaunderOrifices*m
Pi_QSludgeOrifices := Pi_FlowSludge
HW_InletChannelMax := HW_InletChannelMax*m
V_UpFlocHopper := V_UpFlochopper*m/s
V_EtUp := V_EtUp*m/s
ED_DiffusionMin := ED_DiffusionMin*W/kg
ED_FlocEntryOrifice := ED_FlocEntryOrifice*W/kg
HW_EtMax := 20 cm
