# Only parameters with units need to be entered in this file. The units must be attached as SI (meters, kg, s)
# Engineer Entered Values:
Q_Plant := 3000*L/min
acad_version := 2008
# General Plant Parameters
H_PlantFreeboard := 10 cm
# sed tank parameters
W_SedBay := 42.5*in
# width of lamella = width of sed tank bay
W_SedSlopePlate := 30 cm
T_SedSlopePlate := 4 cm
Ti_SludgeDrain := 30 min
EN_PipeSpec := 4
EN_DrillSeries := 1  # Drain time for sed tank
N_SedTanks := 3
N_SedBaysEst := 1
W_SedFrameWall := 4 cm  # not given by ADT
H_SedFrameWall := 7 cm  # not given by ADT
T_SedManifoldEntrance := 2 in
B_SedPipe := 30*cm  # not given by ADT
T_SedPlate := 3 mm
T_SedInletSlope := 4 cm
L_SedPlateSheet := 12 ft
ND_SedPlateFrame := 1.5 in  # This needs to be an exact inch otherwise the outerdiameter function call to the pipe database won't work
# floc parameteres
T_FlocBaffle := 4 cm
S_FlocChannel := 5 cm
# Chem Feed Parameters
C_FcmDoseMax := 90*mg/L^3
C_FcmAlum := 120*gm/L
EN_FcmTube := 0
Ti_StockMin := 30 hr
# Values used to Draw Plant:
T_PlantWall := 10 cm
W_MpWalkway := 1*m
# not given by ADT
