# BASIC INPUTS
# Overall Plant Inputs
# Only parameters with units need to be entered in this file. The units must be attached as SI (meters, kg, s)
Q_Plant := 10*L/s
acad_version := 2008
H_PlantFreeboard := .1*m
W_MpWalkway := 1*m
T_PlantWall := .15*m
EN_PipeSpec := 4
EN_DrillSeries := 1
EN_FcmTube := 0
V_Scour := .1*m/s
# Chemical Storage Tanks, Entrance Tank
# and Rapid Mixer Inputs
C_FcmDoseMax := 90*mg/L
C_FcmAlum := 120*gm/L
Ti_StockMin := 30 hr
7
# Flocculator Inputs
T_FlocBaffle := 4 cm
# Should this be equal to the t.sedplate becuase the same material is used?  and if cement baffles are used should they just be a standard thickness?
Ti_FlocDrain := 45 hr
W_FlocChannelMin := .5*m
H_FlocOption := 1  # H.FlocOption = -1 if same as sed; 0 is optimal or a positive number is user specified
# Sedimentation Inputs
N_SedTanks := 2
N_SedBaysEst := 2
W_SedBay := 1*m
AN_SedTopInlet := 60 deg  # Angle of the sloped wall
ND_SedManifoldMax := 12 in
B_SedManifoldPort := 10 cm
Ti_SludgeDrain := 10 min
W_SedSludgeSF := 2.5 cm  # This safety factor width will prevent an adequate distance extending beneath the slope plate to prevent breaking.
ND_SedPlateFrame := round(1.5*in/in)*in  # This needs to be an exact inch otherwise the outerdiameter function call to the pipe database won't work
L_SedPlateSheet := 12 ft
T_SedPlate := 3 mm
HL_SedWeirMax := 10 cm
T_SedWeir := 4 cm
W_SedFrameWall := 4 cm
H_SedFrameWall := 0 cm
# EXPERT INPUTS
# Chemical Storage Tanks, Entrance Tank
# and Rapid Mixer Inputs
V_EtUp := 700*m/day
HW_EtMax := 20 cm
ED_DiffusionMin := 0.733*W/kg
ED_FlocEntryOrifice := .8*W/kg
# Flocculator Inputs
CP_Floc := CP_Floc*m^(2/3)
Pi_FlocDissipation := 2
Pi_FlocBaffle := 1
# Must be a two element array defining initial and final energy dissipation rates in the flocculator
ED_Floc := [6; 6]*W/kg
S_FlocPort := 1.5 cm
H_FlocOverlapMin := 2 cm  # This is the minumum overlap between adjacent baffles to prevent short circuiting.
S_FlocChannel := 5 cm
L_FlocBaffleSlot := .05*m
# Sedimentation Inputs
Pi_FlowManifold := .8
ED_SedInlet := 5*W/kg
HW_SedEst := 2 m
V_SedUpBod := 70*m/day
V_SedCBod := 10*m/day
V_UpFlocHopper := 30*m/day
B_SedManifoldOrifices := 10 cm
HW_InletChannelMax := .5*m
B_SedPlateFramePipes := 30 cm
AN_SedPlate := 60 deg
B_SedPlateMin := 2 cm + T_SedPlate
N_SedLaunders := 2  # Number of launders per bay
HL_SedLaunderBod := 4 cm  # target headloss in sed launders
Pi_Launder := .95
Pi_QLaunderOrifices := .80
B_SedLaunderOrifices := 10 cm
Pi_QSludgeOrifices := .85
H_SedBetween := 0 in  # Distance between the top of the sed tank slopes and the bottom of the lamella
