# BASIC INPUTS
# Overall Plant Inputs
# Only parameters with units need to be entered in this file. The units must be attached as SI (meters, kg, s)
Q_Plant := 6*L/s
acad_version := 2008
H_PlantFreeboard := .1*m
W_MpWalkway := 1*m
T_PlantWall := .15*m
T_ConcreteMin := 5 cm
EN_PipeSpec := 4
EN_DrillSeries := 1
EN_FcmTube := 0
V_Scour := .1*m/s
W_Plastic := 1 m  # Width of the plastic sheets used for flocculator and lamella
# Chemical Storage Tanks, Entrance Tank
# and Rapid Mixer Inputs
C_FcmDoseMax := 90*mg/L
C_FcmAlum := 120*gm/L
Ti_StockMin := 30 hr
7
# Flocculator Inputs
T_FlocBaffle := 2 mm
# Should this be equal to the t.sedplate becuase the same material is used?  and if cement baffles are used should they just be a standard thickness?
Ti_FlocDrain := 45 hr
W_FlocChannelMin := .5*m  # Can be deleted once switch to Flocculator 3 jmp235 1
H_FlocOption := -1  # H.FlocOption = -1 if same as sed; 0 is optimal or a positive number is user specified
W_HumanMin := .5 m
Pi_JSOptimal := 3
Pi_JSMin := 2
# Sedimentation Inputs
N_SedTanks := 2
N_SedBaysEst := 1
W_SedBay := 1*m
AN_SedSlope := 60 deg  # Angle of the sloped wall
ND_SedManifoldMax := 12 in
B_SedManifoldPortEst := 10 cm
Ti_SludgeDrain := 10 min
ND_SedPlateFrame := round(1.5*in/in)*in  # This needs to be an exact inch otherwise the outerdiameter function call to the pipe database won't work
L_SedPlateSheet := 12 ft
T_SedPlate := 3 mm
HL_SedWeirMax := 10 cm
T_SedWeir := 4 cm
# EXPERT INPUTS
# Chemical Storage Tanks, Entrance Tank
# and Rapid Mixer Inputs
V_EtUp := 700*m/day
HW_EtMax := 20 cm
ED_DiffusionMin := 0.733*mW/kg
ED_FlocEntryOrifice := .8*mW/kg
# Flocculator Inputs
CP_Floc := 110 m^(2/3)
Pi_FlocBaffle := 1
ED_Floc := 6*mW/kg
# Sedimentation Inputs
Pi_FlowManifold := .8
ED_SedInlet := 5*mW/kg
HW_SedEst := 2 m
V_SedUpBod := 70*m/day
V_SedCBod := 10*m/day
V_UpFlocHopper := 30*m/day
HW_InletChannelMax := .5*m
B_SedPlateFramePipes := 30 cm
AN_SedPlate := 60 deg
B_SedPlateMin := 2 cm + T_SedPlate
N_SedLaunders := 2  # Number of launders per bay
HL_SedLaunderBod := 4 cm  # target headloss in sed launders
Pi_Launder := .95
Pi_QLaunderOrifices := .80
B_SedLaunderOrifices := 10 cm
Pi_QSludgeOrifices := .85
H_SedBetween := 0 in  # Distance between the top of the sed tank slopes and the bottom of the lamella
