# San Nicolas flow rate entered 1/25/2012
# Basic Inputs
Language := 0  # Only parameters with units need to be entered in this file. The units must be attached as SI (meters, kg, s)
# General Plant Inputs
Q_Plant := 32*L/s
T_PlantWall := 15 cm
T_ConcreteMin := 5 cm
EN_DrillSeries := 0
# Chemical Storage Tanks, Entrance Tank and
# Rapid Mix Inputs
C_CoagDoseMax := 80*mg/L
C_ChlorineStockEst := 50*gm/L
C_FilterCoagStockEst := 16*gm/L
C_CoagStockEst := 120*gm/L
C_ChlorineDoseMax := 2*mg/L
C_FilterCoagDoseMax := .60*mg/L
Ti_CoagStock := 30 hr
Ti_ChlorineStock := 30 hr
Ti_FilterCoagStock := 30 hr
Ti_StockMin := Ti_CoagStock
# Flocculator Inputs
T_FlocBaffleRigidH := 15 cm
T_FlocBaffleRigidV := 5 cm
H_FlocOption := 0
# Sedimentation Inputs
N_SedTanks := 3
N_SedBaysEst := 2
W_SedPlate := 42 in
L_SedPlateSheet := 300 cm
T_SedPlate := 0.2 cm
T_SedWeir := 4 cm
W_SedBay := W_SedPlate
W_Plastic := W_SedPlate
# Pipe availability will depend on the following country variable. As a default is 0, corresponding to Honduras.
Country := 0
