# Alauca inputs entered by monroe on 12/20/2010
# BASIC INPUTS
# Overall Plant Inputs
# Only parameters with units need to be entered in this file. The units must be attached as SI (meters, kg, s)
Q_Plant := 15*L/s
T_PlantWall := .15*m
T_ConcreteMin := 5 cm
EN_DrillSeries := 1
# Chemical Storage Tanks, Entrance Tank
# and Rapid Mixer Inputs
C_AlumDoseMax := 60*mg/L
C_CoagDoseMax := 60*mg/L
C_AlumStock := 120*gm/L
C_CoagStock := 120*gm/L
Ti_AlumStock := 30 hr
Ti_CoagStock := 30 hr
C_ChlorineDoseMax := 2*mg/L
C_ChlorineStock := 50*gm/L
Ti_ChlorineStock := 30 hr
# Flocculator Inputs
T_FlocBaffleRigidH := 5 cm
T_FlocBaffleRigidV := 5 cm
H_FlocOption := 0
# Sedimentation Inputs
N_SedTanksUser := 20
N_SedBaysEstUser := 4
W_SedPlate := 108*cm
L_SedPlateSheet := 365.8 cm
T_SedPlate := 0.2 cm
T_SedWeir := 5 cm
# code fixes to handle poor definition of input variables. These variables need to be replaced in all code and in the VNG
EN_FcmTube := 0
EN_PipeSpec := 8
W_SedBay := W_SedPlate
W_Plastic := W_SedPlate
C_FcmDoseMax := C_AlumDoseMax
C_FcmAlum := C_AlumStock
Ti_StockMin := Ti_AlumStock
# There are no 1/2 and 3/4 in pipes for pipe schedules SDR 21 and SDR 26, respectively.  Therefore if the user specifies an SDR pipe spec, the largest possible pipe spec is chosen where these sizes are available.  When calling functions for these size pipes (i.e. innerD()), use the EN.PipeSpec12 or EN.PipeSpec34
EN_PipeSpec12 :=
    6 if EN_PipeSpec ≥ 7
    EN_PipeSpec otherwise
EN_PipeSpec34 :=
    7 if EN_PipeSpec ≥ 8
    EN_PipeSpec otherwise
# Pipes availability will be defined by the following variable. As a default is 0, corresponding to Honduras.
Country := 0
