# Stand alone chemical dosers for India
# MathCAD References
Q_Plant := 2.5*L/s
# [reference: ExpertInputs.xmcd]
HL_LfomMin := 10 cm
HL_LfomMax := 10 cm
HL_CdcCoag := HL_LfomMin
HL_CdcChlorine := HL_LfomMin
EN_Chlorine := 2
# Note that the ratio of stock to max dose is the same for chlorine and coagulant and that gives the same design for each doser (given that the viscosity is almost the same for both stocks).
C_ChlorineDoseMax := 2*mg/L
# [reference: MathFunctions.xmcd]
# [reference: PipeDatabase May 2.xmcd]
# [reference: MaterialsDatabase.xmcd]
# [reference: FluidsFunctions.xmcd]
# [reference: CdcFunctions.xmcd]
T_CdcLeverArm := 1/4*in
H_LeverArm := 1 in
# Assumptions
T_TankWall := 25 cm
L_Wall := 3 m
T_Et := 1/4*in
T_MS := 3 mm
T_Separator := 15 cm
W_Wall := 3 m
T_FiLayer := 20 cm
PS_Fi := 2
L_TankOffset := 1.2 m
H_Wall := 3 m
D_ScrewHead := 0.560 in
S_Walkway := 75 cm
T_ScrewHead := 0.132 in
Z_DistributionTankBottom := 6.6 m
# 80 20 parts
# panel mount block
# corner bracket | flat plate
W_PMB := 0.750 in
Vol_OverheadTank := L_Wall*W_Wall*H_Wall
H_Freeboard := 3 cm
H_FlatPlate := 3 in
L_CB := 2 in
H_PMB := 0.812 in
T_Platform := 15 cm
W_FlatPlate := 0.875 in
W_CB := 0.875 in
# This is actual ID for 2.5 kg/cm^2 pipe
L_PMB := 0.700 in
D_FlatPlateHole := 0.257 in
L_CBHoleOffset := 0.5 in
D_PMBHole := 0.250 in
L_FPHoleOffset := 0.5 in
B_CBHole := 1 in
# all z's with reference to treatment room floor
L_PMBHole := 0.625 in
B_FPHole := 1 in
T_CB := 0.188 in
T_FP := 0.188 in
D_CBHole := 0.281 in
# Angled Plate
# Linear Bearing
L_AP := 4 in
H_LB := 1.875 in
L_RoofOverhang := 5 cm
L_LB := 1.968 in
L_APLedge := 1 in
H_CHTAboveEt := 10 cm
W_LB := 1.624 in
L_APHoleOffset := 0.5 in
H_DrumOutlet := 10 cm
T_LBScrewPlate := 0.311 in
B_APHole := 1 in
ND_Transmission := 2 in
L_LBScrewPlate := L_LB - 1.312 in
D_APHole := 0.257 in
D_LBHole := 0.257 in
ND_ChemDrain := 1/2*in
T_AP := 0.188 in
H_LBScrewPlateOffset := 0.438 in
ND_ChemPlu := 1/2*in
B_LBScrewPlateHole := 1 in
# LFOM
Π_LfomSafety := 1.03
# There isn't much cushion for the LFOM, but assume it doesn't ever run at max flow anyway
# [reference: LFOM.xmcd]
H_LfomOrifices = [0.47625; 1.72625; 2.97625; 4.22625; 5.47625; 6.72625; 7.97625; 9.22625] cm
D_LfomOrifices = 6 in/16
ND_RMPipe = 3 in
N_LfomOrifices = [13; 13; 6; 4; 4; 3; 4; 4]
# DOUBLE CHECK LFOM ALGORITHM!!!!
# Entrance Tank
# Assume:
H_LeverFulcrumAboveEtTop := 3 cm
T_MountingPlate := 3/4*in
W_MountingPlate := 3 in
H_MountingOverlap := 3 in
W_MountingBox := 3/4*in
H_MountingPlate := 1.15*H_LeverFulcrumAboveEtTop + W_MountingBox/2 + H_MountingOverlap
L_HoleOffset := 1.5 in
D_TubeAvailable := [2]*in/16
ND_RMPipe = 3 in
L_EtFloat := 6 in
ND_EtDrain := 1.5 in
ND_Inlet := 3 in  # Assume Square
H_EtFloat := 1 in
# line up inlet, lfom on left; float, drain on right
L_CdcLeverArm := 20 in  # redefine so that lever arm sits within the stand
HL_EtDrainPipe := h_l(Q_Plant, ND_EtDrain, 4 m, K_PipeEnt + K_PipeExit + 2*K_El90, Nu_Water, E_Pvc) = 1.53713 m
# there should be at least 2m of available head if the drain pipe drops to the bottom
HL_EtDrainPipeOneInch := h_l(Q_Plant, 1 in, 4 m, K_PipeEnt + K_PipeExit + 2*K_El90, Nu_Water, E_Pvc) = 10.1276 m  # not feasible to reduce drain pipe below 1.5"
D_DrainUnion := 3 in + 5/32*in
D_LfomUnion := 5 in + 25/32*in
L_LfomUnionChord := D_LfomUnion*sin(acos((S_Fitting/4 + D_LfomUnion/2 - (S_Fitting/2 + D_DrainUnion/2))/(0.5*D_LfomUnion))) = 0.140806 m
D_LfomUnion = 0.146844 m
L_EtMin := max((L_CdcLeverArm - T_MountingPlate + L_EtFloat + S_Fitting)/2 - L_HoleOffset + max(0, OD(ND_Transmission) + D_DrainUnion + S_Fitting/2 - L_EtFloat), OD(ND_Transmission) + D_DrainUnion + L_LfomUnionChord + 2*S_Fitting) = 0.3813 m
OD(ND_Transmission) + D_DrainUnion + S_Fitting/2 - L_EtFloat = 1.30937 cm
L_FloatShiftMax := 10 in - sqrt((10 in - L_HoleOffset)^2 - (10 cm)^2) = 6.26553 cm  # this is how much the float moves in the x direction at max flow
(D_DrainUnion/2 + S_Fitting/2 + OD(ND_Transmission)/2)*100 = 9.52469 m
L_CdcLeverArm/2 - T_MountingPlate/2 - S_Fitting/2 - L_FloatShiftMax - OR(ND_RMPipe) - D_LfomUnion/2 - L_HoleOffset - L_EtFloat/2 - T_Et = -8.17021 cm
# there is not enough space for the float to move in the x direction if there is half S.Fitting on either side of the LfomPipe. Move the LFOM in line with inlet and drain pipes for room.
D_LfomUnion - OD(ND_RMPipe) = 2.28125 in
W_EtMin := (S_Fitting + L_EtFloat)/2 + max(S_Fitting + T_CdcLeverArm/2 + D_LfomUnion, L_EtFloat/2 + S_Fitting + D_DrainUnion) = 0.307569 m
HL_EtOverflow := Headloss_weir(Q_Plant/2, OD(ND_EtDrain)*π) = 0.0269835 m  # assume you would never drain more than half of the plant flow through overflow
L_DrainUnion := (2 + 15/16)*in
L_LfomUnion := (4 + 11/32)*in
SD_LfomUnion := (1 + 31/32)*in
SD_DrainUnion := (1 + 5/16)*in
HW_EtMax := L_LfomUnion - SD_LfomUnion/2 + H_EtFloat/2 + HL_Lfom + HL_EtOverflow
H_Et := HW_EtMax + H_Freeboard = 0.255012 m
# Chem Doser, Storage, Calibration Columns, Orifice Plate
H_MountingPlate = 0.120225 m
T_MountingPlate = 0.01905 m
C_ChlorineDoseAvg := 1*mg/L
HL_CdcChlorine = 0.1 m
C_ChlorineStockMax := 1*gm/L
Ti_ChlorineEst := 1 day
D_ChlorineTank := 14.5 in
# 10 gallon bucket
H_ChlorineTank := 20.75 in
W_ChemPlatform := max(W_EtMin + 2*S_Fitting, D_ChlorineTank + S_Fitting/3 + BallValveLength(ND_ChemPlu) + 2*MaleAdapterLength(ND_ChemPlu) - 2*BallValveSocket(ND_ChemPlu) + CouplingLength(ND_ChemPlu) + SocketDepth(ND_ChemPlu)) = 0.551246 m
L_ChemPlatform := max(2*D_ChlorineTank + 3*S_Fitting/2, L_EtMin + 2*T_Et + 2*S_Fitting) = 0.8116 m
L_ChlorineTube := 0.5 m
D_ChlorineTube := 1/8*in
Q_ChlorineTube := Q_pipetotal(D_ChlorineTube, HL_CdcChlorine, L_ChlorineTube, Nu_Water, E_Pvc, K_CdcTube) = 3.76722 mL/s
Re_Pipe(Q_ChlorineTube, D_ChlorineTube, Nu_Water) = 1510.73  # laminar
C_ChlorineDoseMax = 0.002 kg/m^3
C_ChlorineStock := Q_Plant*C_ChlorineDoseMax/Q_ChlorineTube = 1.32724 gm/L
V_Solution := 25000*L/day*Ti_ChlorineEst*C_ChlorineDoseAvg/C_ChlorineStock = 18.8361 L
V_Tank := 10 gal
Ti_Chlorine := C_ChlorineStock*V_Tank/(C_ChlorineDoseAvg*25000*L/day) = 2.00966 day
# Calibration Column
Ti_Res := 0.5 min
H_CalColSF := 1.1
Vol_ChlorCalCol := H_CalColSF*Ti_Res*Q_ChlorineTube
ND_ChlorCalCol := 1 in
H_ChlorCalCol := round(H_CalColSF*Vol_ChlorCalCol/(IR(ND_ChlorCalCol, PS_Fi)^2*π)/(5 cm))*5*cm = 0.25 m
H_mL := cm^3/(IR(ND_ChlorCalCol, PS_Fi)^2*π) = 1.79346 mm  # don't want the height of a mL to be too small, makes readings hard to take
# original calculation
Z_LowerPlatform == H_Wall + T_TankWall + sin(45 deg)*(L_ChlorineTube + CouplingLength(ND_ChemPlu) + DiagWyeLength(ND_ChemPlu)) + 10 cm + OR(ND_ChemPlu)/sqrt(2) + SocketDepth(ND_ChemPlu) + MaleAdapterLength(ND_ChemPlu) + BallValveLength(ND_ChemPlu) - BallValveSocket(ND_ChemPlu) + Z_DistributionTankBottom =  # error: This variable is undefined.
Z_LowerPlatform := H_Wall + T_TankWall + Z_DistributionTankBottom + 70 cm  # this value is now fixed
Z_EtBottom := Z_LowerPlatform + T_MS + T_Et
Z_LeverArmFulcrum := Z_EtBottom + H_Et + H_LeverFulcrumAboveEtTop
Z_UpperPlatform == Z_LeverArmFulcrum + 35 cm  # original calculation
Z_UpperPlatform := Z_LowerPlatform + 70 cm
H_RoomTall == Z_UpperPlatform + H_ChlorineTank + 3 ft - T_TankWall - H_Wall - Z_DistributionTankBottom =  # error
H_RoomTall := 2.654 m  # this value is now fixed
# original calculations of H.RoomTall and H.RoomShort
H_RoomShort := 1.981 m  # this value is now fixed
H_RoomShort == max(6.5 ft, 0.6*H_RoomTall) = 0
H_DrumOutletAboveCHT := Z_UpperPlatform - Z_EtBottom - H_CHTAboveEt - H_Et + H_DrumOutlet = 0.435638 m
D_LargeChlorineTubes := 3/8*in  # make all non-design tubes double the size of the design tube
L_TubeDrumToCHT := 2*H_DrumOutletAboveCHT
HL_TubeDrumToCHT := h_l(Q_ChlorineTube, D_LargeChlorineTubes, L_TubeDrumToCHT, K_PipeEnt + K_PipeExit, Nu_Water, E_Pvc) = 0.00187052 m
D_ChlorineFloatValveOrifice :=
    i ← 0
    while h_orifice(D_FltVlvOrificesAvail[i], Pi_VCOrifice, Q_ChlorineTube) ≥ H_DrumOutletAboveCHT - HL_TubeDrumToCHT - 5 cm
        i ← i + 1
    return max(D_FltVlvOrificesAvail[i], D_FltVlvOrificesAvail[1])
Z_DistributionTankBottom = 6.6 m
D_ChlorineFloatValveOrifice = 2.992 in/16  # use at least the second smallest orifice to prevent clogging
HL_ChlorineFloatValveOrifice := h_orifice(D_ChlorineFloatValveOrifice, Pi_VCOrifice, Q_ChlorineTube) = 0.580671 cm
T_LfomOrificePlate := 3 mm
D_LfomOrifices = 3 in/8
HL_LfomOrificePlate := 0.9*(Z_LowerPlatform - (H_Wall + T_TankWall + Z_DistributionTankBottom) - L_LfomUnion - S_Fitting/2) = 0.508202 m
3/16*in = 4.7625 mm
A_LfomOrificePlate := A_orifice(HL_LfomOrificePlate, Pi_VCOrifice, Q_Plant)
D_LfomOrificePlate := D_circle(A_LfomOrificePlate) = 0.0400044 m
Q_MinSubmergedInjection := Q_orifice(D_LfomOrificePlate, S_Fitting + 2*SocketDepth(ND_RMPipe) - T_LfomOrificePlate + ElbowRadius(ND_ChemPlu), Pi_VCOrifice) = 1.37508 L/s
H_RoomTall = 2.654 m
L_ChemPlatform = 0.8116 m
Z_UpperPlatform = 11.25 m
# AutoCAD drawing programs:
# Translators:
# These are the codes that take MathCAD outputs and create AutoCAD scripts that are used to draw the plant (formerly Basics)
# [reference: MtoATranslators.xmcd]
# The wrapped MtoA translator contains the functions that the user will want to access. These functions will draw pieces with full functionality - specifying the location, dimension, and orientation of the object. Also, it contains layer control and subtraction capabilities for grouped objects.
# [reference: MtoATranslatorsWrapped.xmcd]
# Drawing functions:
# [reference: ChannelF.xmcd]
# [reference: PlumbingF May.xmcd]
# [reference: TankF.xmcd]
# [reference: StairsF.xmcd]
# AutoCAD References
# Chemical Dose Controller For Overhead Tanks
# Origin points
# Tank, Room and Platform Origins
Tank_Origin := [0 m; 0 m; Z_DistributionTankBottom]
W_SquarePipe := 1 in
Room_Origin := Tank_Origin + [0; 0; H_Wall + T_TankWall]
Origin_UpperPlatform := [
    Room_Origin[0] - OR_Fitting(ND_Transmission) - ShortTeeLength(ND_Transmission) - SocketDepth(ND_Transmission) - 2*MaleAdapterLength(ND_Transmission) - GateValveLength(ND_Transmission) + 2*GateValveSocket(ND_Transmission);
    Room_Origin[1] + 2*S_Fitting;
    Z_UpperPlatform
]
Origin_LowerPlatform := [Origin_UpperPlatform[0]; Origin_UpperPlatform[1]; Z_LowerPlatform]
ChlorTank1_Origin := [
    Origin_UpperPlatform[0] - S_Fitting/2 - D_ChlorineTank/2;
    S_Fitting/3 + D_ChlorineTank/2 + Origin_UpperPlatform[1];
    T_MS + Origin_UpperPlatform[2]
]
ChlorTank2_Origin := [
    Origin_UpperPlatform[0] - S_Fitting - 3*D_ChlorineTank/2;
    S_Fitting/3 + D_ChlorineTank/2 + Origin_UpperPlatform[1];
    T_MS + Origin_UpperPlatform[2]
]
-(S_Fitting/3 + D_ChlorineTank/2) + W_ChemPlatform - 2*MaleAdapterLength(ND_ChemPlu) - BallValveLength(ND_ChemPlu) + 2*BallValveSocket(ND_ChemPlu)
FlowMeteringTank_Origin := [
    ChlorTank1_Origin[0] + D_DrainUnion/2 + OD(ND_Transmission) + S_Fitting;
    Origin_UpperPlatform[1] + S_Fitting;
    T_MS + T_Et + Z_LowerPlatform
]
# Chlorine Drum Delivery Plumbing
ChlorDelivery2Bulkhead_Origin := [
    ChlorTank2_Origin[0];
    ChlorTank1_Origin[1] + D_ChlorineTank/2;
    ChlorTank1_Origin[2] + B_StockOutlet
]
ChlorDelivery1Bulkhead_Origin := [
    ChlorTank1_Origin[0];
    ChlorTank1_Origin[1] + D_ChlorineTank/2;
    ChlorTank1_Origin[2] + B_StockOutlet
]
ChlorDelivery2FTA_Origin := ChlorDelivery2Bulkhead_Origin + [0; BulkheadThreadLength(ND_ChemPlu); 0]
ChlorDelivery1FTA_Origin := ChlorDelivery1Bulkhead_Origin + [0; BulkheadThreadLength(ND_ChemPlu); 0]
ChlorDelivery2PreValveMTA_Origin := ChlorDelivery2FTA_Origin + [0; CouplingLength(ND_ChemPlu); 0]
ChlorDelivery1PreValveMTA_Origin := ChlorDelivery1FTA_Origin + [0; CouplingLength(ND_ChemPlu); 0]
ChlorDelivery2Valve_Origin := ChlorDelivery2PreValveMTA_Origin + [0; -SocketDepth(ND_ChemPlu) + MaleAdapterLength(ND_ChemPlu); 0]
ChlorDelivery1Valve_Origin := ChlorDelivery1PreValveMTA_Origin + [0; -SocketDepth(ND_ChemPlu) + MaleAdapterLength(ND_ChemPlu); 0]
ChlorDelivery2PostValveMTA_Origin := ChlorDelivery2Valve_Origin + [
    0;
    -2*BallValveSocket(ND_ChemPlu) + BallValveLength(ND_ChemPlu) + MaleAdapterLength(ND_ChemPlu) - SocketDepth(ND_ChemPlu);
    0
]
ChlorDelivery1PostValveMTA_Origin := ChlorDelivery1Valve_Origin + [
    0;
    -2*BallValveSocket(ND_ChemPlu) + BallValveLength(ND_ChemPlu) + MaleAdapterLength(ND_ChemPlu) - SocketDepth(ND_ChemPlu);
    0
]
ChlorDelivery2Elbow_Origin := ChlorDelivery2PostValveMTA_Origin + [0; 2*SocketDepth(ND_ChemPlu); 0]
ChlorDelivery1Elbow_Origin := ChlorDelivery1PostValveMTA_Origin + [0; 2*SocketDepth(ND_ChemPlu); 0]
ChlorDelivery2Union_Origin := ChlorDelivery2Elbow_Origin + [0; ElbowRadius(ND_ChemPlu); -ElbowRadius(ND_ChemPlu) - UnionLength(ND_ChemPlu)] = [-0.942931; 0.672499; 11.2914] m
ChlorDelivery1Union_Origin := ChlorDelivery1Elbow_Origin + [0; ElbowRadius(ND_ChemPlu); -ElbowRadius(ND_ChemPlu) - UnionLength(ND_ChemPlu)] = [-0.549631; 0.672499; 11.2914] m
ChlorDeliveryTeeToSedTrap_Origin := ChlorDelivery1Union_Origin + [0; 0; -2*SocketDepth(ND_ChemPlu)] = [-0.549631; 0.672499; 11.2574] m
ChlorDelivery2Elbow2_Origin := [
    ChlorDelivery2Union_Origin[0] + ElbowRadius(ND_ChemPlu);
    ChlorDelivery2Union_Origin[1];
    ChlorDeliveryTeeToSedTrap_Origin[2] - ShortTeeLength(ND_ChemPlu)
]
ChlorDeliveryAirReleaseTee_Origin := [
    Origin_UpperPlatform[0] - W_SquarePipe/2 - ShortTeeLength(ND_ChemPlu);
    ChlorDeliveryTeeToSedTrap_Origin[1];
    ChlorDeliveryTeeToSedTrap_Origin[2] - ShortTeeLength(ND_ChemPlu)
] = [-0.367931; 0.672499; 11.2427] m
ChlorAirReleasePipe_Origin := ChlorDeliveryAirReleaseTee_Origin + [ShortTeeLength(ND_ChemPlu); 0; ShortTeeLength(ND_ChemPlu)]
L_ChlorAirRelease := UnionLength(ND_ChemPlu) + 2*SocketDepth(ND_ChemPlu) + ElbowRadius(ND_ChemPlu) + OR_Fitting(ND_ChemPlu)
ChlorAirReleaseValve_Origin := ChlorAirReleasePipe_Origin + [0; 0; L_ChlorAirRelease]
ChlorSedTrapTee_Origin := ChlorDeliveryAirReleaseTee_Origin + [-2*SocketDepth(ND_ChemPlu) - ShortTeeLength(ND_ChemPlu); 0; -ShortTeeLength(ND_ChemPlu)]
L_DeliveryTeeToSedTrap := ChlorSedTrapTee_Origin[0] - 2*ShortTeeLength(ND_ChemPlu) - ChlorDeliveryTeeToSedTrap_Origin[0]
S_FastenerFromTop := 1.5 cm
OD_Float := 1.4 in
S_FastenerToFloatValve := S_Fitting/2 + OD_Float/2  # assume the float valve moves within S.Fitting/2 vertically during open/close
Z_ChlorDeliveryCenterlineMin := Z_LeverArmFulcrum + S_FastenerToFloatValve + 3*B_APHole + L_APHoleOffset + OR_Fitting(ND_ChemPlu)
ChlorElbowToCalCol_Origin := [
    ChlorAirReleaseValve_Origin[0];
    ChlorAirReleaseValve_Origin[1];
    Z_ChlorDeliveryCenterlineMin + ElbowRadius(ND_ChemPlu) + S_Fitting/2
]
ChlorFlowSwapMTALower_Origin := ChlorElbowToCalCol_Origin + [0; 0; 2*SocketDepth(ND_ChemPlu)]
ChlorFlowSwapMTAUpper_Origin := ChlorFlowSwapMTALower_Origin + [
    0;
    0;
    BallValveLength(ND_ChemPlu) - 2*BallValveSocket(ND_ChemPlu) + 2*MaleAdapterLength(ND_ChemPlu) - 2*SocketDepth(ND_ChemPlu)
]
ChlorFlowSwapValve_Origin := ChlorFlowSwapMTAUpper_Origin + [0; 0; -MaleAdapterLength(ND_ChemPlu) + SocketDepth(ND_ChemPlu)]
# this is the valve that will switch from stock flow to cal col flow
L_ChlorAirReleaseToMTA := ChlorDeliveryAirReleaseTee_Origin[2] - ChlorFlowSwapMTAUpper_Origin[2] - ShortTeeLength(ND_ChemPlu)
# Chlorine Drum Delivery to Drain Plumbing | starts with the upper MTA of the sed trap
L_SedTrapPipeWOFittings := BulkheadThreadLength(ND_ChemDrain) - SocketDepth(ND_ChemDrain) - T_ChemTankWall + CouplingLength(ND_ChemDrain) + UnionLength(ND_ChemDrain) + 2*MaleAdapterLength(ND_ChemDrain) + BallValveLength(ND_ChemDrain) - 2*BallValveSocket(ND_ChemDrain) + SocketDepth(ND_ChemDrain) + ShortTeeLength(ND_ChemDrain)
L_SedTrapFittingsSubtract := ChlorTank1_Origin[2] - ChlorSedTrapTee_Origin[2] + 2*MaleAdapterLength(ND_ChemDrain) + BallValveLength(ND_ChemDrain) - 2*BallValveSocket(ND_ChemDrain) + ElbowRadius(ND_ChemDrain)
L_SedTrapPipe := L_SedTrapPipeWOFittings - L_SedTrapFittingsSubtract = 0.0870849 m
ChlorSedTrapMTAUp_Origin := ChlorSedTrapTee_Origin + [0; 0; -L_SedTrapPipe]
ChlorSedTrapDrainValve_Origin := ChlorSedTrapMTAUp_Origin + [0; 0; SocketDepth(ND_ChemPlu) - MaleAdapterLength(ND_ChemPlu)]
ChlorSedTrapMTALow_Origin := ChlorSedTrapDrainValve_Origin + [
    0;
    0;
    2*BallValveSocket(ND_ChemPlu) - BallValveLength(ND_ChemPlu) - MaleAdapterLength(ND_ChemPlu) + SocketDepth(ND_ChemPlu)
] = [-0.416681; 0.672499; 11.0724] m
ChlorSedTrapElbowBelowValve_Origin := [0; 0; -2*SocketDepth(ND_ChemPlu)] + ChlorSedTrapMTALow_Origin
ChlorSedTrapElbowtoDrain_Origin := [
    ChlorTank1_Origin[0];
    ChlorSedTrapElbowBelowValve_Origin[1] - ElbowRadius(ND_ChemDrain);
    ChlorSedTrapElbowBelowValve_Origin[2] - ElbowRadius(ND_ChemDrain)
]
# Chlorine Drum Drain Plumbing
L_SedTrapToDrainX := ChlorSedTrapElbowBelowValve_Origin[0] - ChlorSedTrapElbowtoDrain_Origin[0] - 2*ElbowRadius(ND_ChemPlu) = 0.10345 m
ChlorDrain1Bulkhead_Origin := ChlorTank1_Origin + [0; D_ChlorineTank/6; T_ChemTankWall]  # keep this in top view
ChlorDrain2Bulkhead_Origin := ChlorTank2_Origin + [0; D_ChlorineTank/6; T_ChemTankWall]
ChlorDrain1FTA_Origin := ChlorDrain1Bulkhead_Origin + [0; 0; -BulkheadThreadLength(ND_ChemDrain)]
ChlorDrain2FTA_Origin := ChlorDrain2Bulkhead_Origin + [0; 0; -BulkheadThreadLength(ND_ChemDrain)]
ChlorDrain1Union_Origin := ChlorDrain1FTA_Origin + [0; 0; 2*SocketDepth(ND_ChemDrain) - CouplingLength(ND_ChemDrain) - UnionLength(ND_ChemDrain)]
ChlorDrain2Union_Origin := ChlorDrain2FTA_Origin + [0; 0; 2*SocketDepth(ND_ChemDrain) - CouplingLength(ND_ChemDrain) - UnionLength(ND_ChemDrain)]
ChlorDrain1MTAUp_Origin := ChlorDrain1Union_Origin + [0; 0; -2*SocketDepth(ND_ChemDrain)]
ChlorDrain2MTAUp_Origin := ChlorDrain2Union_Origin + [0; 0; -2*SocketDepth(ND_ChemDrain)]
ChlorDrain1Valve_Origin := ChlorDrain1MTAUp_Origin + [0; 0; SocketDepth(ND_ChemDrain) - MaleAdapterLength(ND_ChemDrain)]
ChlorDrain2Valve_Origin := ChlorDrain2MTAUp_Origin + [0; 0; SocketDepth(ND_ChemDrain) - MaleAdapterLength(ND_ChemDrain)]
ChlorDrain1MTALow_Origin := ChlorDrain1Valve_Origin + [
    0;
    0;
    -BallValveLength(ND_ChemDrain) + 2*BallValveSocket(ND_ChemDrain) - MaleAdapterLength(ND_ChemDrain) + SocketDepth(ND_ChemDrain)
]
ChlorDrain2MTALow_Origin := ChlorDrain2Valve_Origin + [
    0;
    0;
    -BallValveLength(ND_ChemDrain) + 2*BallValveSocket(ND_ChemDrain) - MaleAdapterLength(ND_ChemDrain) + SocketDepth(ND_ChemDrain)
]
ChlorDrain1Tee_Origin := [0; 0; -2*SocketDepth(ND_ChemDrain)] + ChlorDrain1MTALow_Origin
ChlorDrain2Elbow_Origin := ChlorDrain2MTALow_Origin + [0; -ElbowRadius(ND_ChemDrain); -2*SocketDepth(ND_ChemDrain) - ElbowRadius(ND_ChemDrain)]
L_SedTrapToDrainY := ChlorSedTrapElbowtoDrain_Origin[1] - ShortTeeLength(ND_ChemPlu) - ChlorDrain1Tee_Origin[1] = 0.280799 m
ChlorDrain2Elbow2_Origin := ChlorDrain2Elbow_Origin + [0; -TeeLength(ND_ChemDrain) - 2*SocketDepth(ND_ChemDrain); 0]
ChlorDrainTee1to2_Origin := [
    ChlorTank1_Origin[0] - ShortTeeLength(ND_ChemPlu);
    ChlorDrain2Elbow2_Origin[1] - ElbowRadius(ND_ChemPlu);
    ChlorDrain2Elbow2_Origin[2]
]
ChlorDrainElbowToEtDrain_Origin := [
    ChlorDrain1Tee_Origin[0];
    Room_Origin[1] + OR_Fitting(ND_EtDrain) + ElbowRadius(ND_ChemDrain);
    ChlorDrain1Tee_Origin[2] - ShortTeeLength(ND_ChemDrain)
]
EtDrainUnion_Origin := [
    ChlorTank1_Origin[0];
    -(S_Fitting/2 + D_DrainUnion/2) + W_EtMin + FlowMeteringTank_Origin[1];
    L_DrainUnion - SD_DrainUnion/2 - SocketDepth(ND_EtDrain) + FlowMeteringTank_Origin[2]
] = [-0.549631; 0.392484; 10.5853] m
EtDrainElbow_Origin := EtDrainUnion_Origin + [0; 0; -UnionLength(ND_EtDrain)]
ChlorEtDrainTee_Origin := [
    EtDrainElbow_Origin[0];
    Tank_Origin[1] + OR_Fitting(ND_EtDrain);
    EtDrainElbow_Origin[2] + ShortTeeLength(ND_EtDrain) - ElbowRadius(ND_EtDrain)
] = [-0.549631; 0.028575; 10.5432] m
L_ChlorDrain1To2Y := ChlorDrain1Tee_Origin[1] - ChlorDrainTee1to2_Origin[1] - TeeLength(ND_ChemDrain) = 0.0635 m
L_ChlorDrain1To2X := ChlorDrainTee1to2_Origin[0] - ChlorDrain2Elbow2_Origin[0] - ElbowRadius(ND_ChemDrain)
L_ChlorDrainToEtY := ChlorDrainTee1to2_Origin[1] - ChlorDrainElbowToEtDrain_Origin[1] - ShortTeeLength(ND_ChemDrain)
ReducerLengthDrain := CouplingLength(ND_EtDrain) - SocketDepth(ND_EtDrain) - SocketDepth(ND_ChemDrain)
ChlorEtDrainReducer_Origin := ChlorEtDrainTee_Origin + [0; 0; 2*SocketDepth(ND_EtDrain)] = [-0.549631; 0.028575; 10.6072] m
L_ChlorDrainToEtDrainZ := ChlorDrainElbowToEtDrain_Origin[2] - ElbowRadius(ND_ChemDrain) - ChlorEtDrainReducer_Origin[2] - ReducerLengthDrain = 0.378429 m
ChlorRoomDrainTee_Origin := [
    ChlorEtDrainReducer_Origin[0];
    Tank_Origin[1] - OR_Fitting(ND_EtDrain) + ShortTeeLength(ND_EtDrain) - T_TankWall;
    Room_Origin[2]
] = [-0.549631; -0.221425; 9.85] m
ChlorEtDrainElbow_Origin := [
    ChlorEtDrainTee_Origin[0];
    ChlorRoomDrainTee_Origin[1] - ShortTeeLength(ND_EtDrain) + ElbowRadius(ND_EtDrain);
    ChlorEtDrainTee_Origin[2] - ShortTeeLength(ND_EtDrain)
]
ChlorDrainToGround_Origin := ChlorRoomDrainTee_Origin + [0; -ShortTeeLength(ND_EtDrain); -ShortTeeLength(ND_EtDrain)]
# LFOM Plumbing
LFOMunion_Origin := [
    FlowMeteringTank_Origin[0] - L_EtMin + S_Fitting/4 + D_LfomUnion/2;
    FlowMeteringTank_Origin[1] + W_EtMin - S_Fitting/4 - D_LfomUnion/2;
    FlowMeteringTank_Origin[2] + L_LfomUnion - SD_LfomUnion/2 - SocketDepth(ND_RMPipe)
] = [-0.6946; 0.371647; 10.5987] m
# Sludge Drum
H_Drum := 930 mm
D_Drum := 512 mm
ND_SludgeDrumDrain := 1 in
SludgeDrum_Origin := [ChlorDrainToGround_Origin[0]; Room_Origin[1] - T_TankWall; T_ChemTankWall]
SludgeDrumBulkhead_Origin := [SludgeDrum_Origin[0]; SludgeDrum_Origin[1] - D_Drum/2; SludgeDrum_Origin[2] + B_StockOutlet]
SludgeDrumFTA_Origin := SludgeDrumBulkhead_Origin + [0; -BulkheadThreadLength(ND_SludgeDrumDrain); 0]
SludgeDrumPreValveMTA_Origin := SludgeDrumFTA_Origin + [0; -CouplingLength(ND_SludgeDrumDrain); 0]
SludgeDrumValve_Origin := SludgeDrumPreValveMTA_Origin + [0; SocketDepth(ND_SludgeDrumDrain) - MaleAdapterLength(ND_SludgeDrumDrain); 0]
SludgeDrumPostValveMTA_Origin := SludgeDrumValve_Origin + [
    0;
    2*BallValveSocket(ND_SludgeDrumDrain) - BallValveLength(ND_SludgeDrumDrain) - MaleAdapterLength(ND_SludgeDrumDrain) + SocketDepth(ND_SludgeDrumDrain);
    0
]
SludgeDrumElbow_Origin := SludgeDrumPostValveMTA_Origin + [0; -2*SocketDepth(ND_SludgeDrumDrain); 0]
SludgeDrumUnion_Origin := SludgeDrumElbow_Origin + [
    0;
    -ElbowRadius(ND_SludgeDrumDrain);
    -ElbowRadius(ND_SludgeDrumDrain) - UnionLength(ND_SludgeDrumDrain)
] = [-0.549631; -0.754605; 0.028005] m
L_ChlorLargeDrainVertUp := ChlorSedTrapElbowtoDrain_Origin[2] - ChlorEtDrainTee_Origin[2] - ReducerLengthDrain - 2*SocketDepth(ND_EtDrain) = 0.393179 m
L_ChlorLargeDrainVertLow := ChlorEtDrainElbow_Origin[2] - ChlorRoomDrainTee_Origin[2] - ShortTeeLength(ND_EtDrain) - ElbowRadius(ND_EtDrain) = 0.551936 m
L_ChlorLargeDrainLast := ChlorRoomDrainTee_Origin[2] - SludgeDrum_Origin[2] - ShortTeeLength(ND_EtDrain) - 0.95*H_Drum
RoomDrainWedge_Origin := [ChlorRoomDrainTee_Origin[0] - OR(ND_EtDrain); Room_Origin[1]; Room_Origin[2]]
RoomDrainWedge_Dim := [7 cm; OD(ND_EtDrain); OR(ND_EtDrain)]
L_RoomDrainPipe := T_TankWall - (ShortTeeLength(ND_EtDrain) - OR_Fitting(ND_EtDrain))
# 1/2" ET drain valve
ND_EtMainDrain := 0.5 in
Vol_H2OEt := L_EtMin*W_EtMin*HW_EtMax - π*OD(ND_RMPipe)^2/4*HW_EtMax - OD(ND_EtDrain)^2/4*HW_EtMax = 24.8607 L
Q_EtMainDrainMax := ID(ND_EtMainDrain, PS_Fi)^2/2*Pi_VCOrifice*sqrt(2*g*HW_EtMax) = 0.165172 L/s
LW_EtEffective := Vol_H2OEt/HW_EtMax = 0.110486 m^2
Ti_EtMainDrain := 2*HW_EtMax^(1/2)*LW_EtEffective/(ID(ND_EtMainDrain, PS_Fi)^2/2*sqrt(2*g)) = 3.1608 min
EtMainDrainCoupling_Origin := FlowMeteringTank_Origin + [
    -(S_Fitting/2 + OR_Fitting(ND_EtMainDrain));
    W_EtMin - S_Fitting/2 - OR_Fitting(ND_EtMainDrain);
    -SocketDepth(ND_EtMainDrain)
]
L_MainDrainValvePipe := 10 cm
EtMainDrainValve_Origin := EtMainDrainCoupling_Origin + [0; 0; 2*SocketDepth(ND_EtMainDrain) - CouplingLength(ND_EtMainDrain) - L_MainDrainValvePipe] = [-0.438113; 0.418678; 10.4295] m
L_FloatValve := 6.5 in  # flange to tip
T_CHT := 1/4*in
ND_FloatValveBarb := 1/4*in
D_FloatValveThread := 0.50250 in  # http://machiningproducts.com/html/NPT-Thread-Dimensions.html
L_CHT := L_FloatValve + S_Fitting/2 = 0.1901 m
W_CHT := OD_Float + S_Fitting = 0.08556 m
H_FloatValveFromTop := S_FastenerFromTop + S_FastenerToFloatValve
H_CHT := S_FastenerFromTop + S_FastenerToFloatValve + S_Fitting + OD_Float/2 = 0.12556 m
Origin_LowerPlatform[1] + W_ChemPlatform + W_LB = 0.692496 m
D_PVCScrew := 1/4*in
L_CHTOffset := S_Fitting/2 + B_APHole*3 = 0.1012 m
L_CHT = 0.1901 m
# bottom right origin, looking from top
CHT_Origin := [
    Origin_LowerPlatform[0] - 1.5*W_SquarePipe - L_CHTOffset + L_CHT;
    Origin_LowerPlatform[1] + W_ChemPlatform + T_LBScrewPlate + W_SquarePipe + T_AP + T_CHT;
    Z_LeverArmFulcrum + S_FastenerToFloatValve + S_FastenerFromTop - H_CHT
] = [-0.289681; 0.695671; 10.7766] m
# Storage Tank, Room and Details
TankLyr := layer_new("Tank", grey)
TankBox := Tank(Tank_Origin, [L_Wall; W_Wall; H_Wall], T_TankWall)
TankFrz := FreezeLayer("Tank")
TankScript := stack(TankLyr, TankBox, TankFrz)
RoomLyr := layer_new("Room", grey)
RoomBox := Tank(Room_Origin, [L_Wall; W_Wall; H_RoomTall], T_TankWall)
HatchLedge := BoxF([-(W_ChemPlatform*3/4); W_Wall - 1.05*OD_Fitting(ND_RMPipe) - S_Fitting; H_Wall] + Tank_Origin, [
    -(W_ChemPlatform*3/4) - 71.35 cm;
    W_Wall - 1.05*OD_Fitting(ND_RMPipe) - S_Fitting - S_Walkway;
    H_Wall + T_TankWall + S_Fitting
] + Tank_Origin, [0; 0; 0]*deg)
# make a drain ledge
# 22.75 in dia for 55 gal drum
RoomFrz := FreezeLayer("Room")
HatchLedgeCut := BoxF([-(W_ChemPlatform*3/4) - 10 cm; W_Wall - 1.05*OD_Fitting(ND_RMPipe) - 3*S_Fitting; H_Wall] + Tank_Origin, [
    -(W_ChemPlatform*3/4) - 61.35 cm;
    W_Wall - 1.05*OD_Fitting(ND_RMPipe) - S_Walkway + S_Fitting;
    H_Wall + T_TankWall + S_Fitting
] + Tank_Origin, [0; 0; 0]*deg)
WindowLower := BoxF([-zc - L_Wall - T_TankWall; W_Wall/2 - 0.25*W_Wall; H_RoomShort*0.5] + Room_Origin, [zc - L_Wall; W_Wall/2 + 0.25*W_Wall; H_RoomShort*0.5 + 75 cm] + Room_Origin, [0; 0; 0]*deg)
WindowUpper := BoxF([-zc; W_Wall/2 - 0.25*W_Wall; H_RoomTall*0.60] + Room_Origin, [zc + T_TankWall; W_Wall/2 + 0.25*W_Wall; H_RoomTall*0.60 + 75 cm] + Room_Origin, [0; 0; 0]*deg)
RoomSlope := WedgeF(Room_Origin + [-L_Wall - T_TankWall; W_Wall + T_TankWall; H_RoomTall], Room_Origin + [T_TankWall; -T_TankWall; H_RoomShort], [0; 0; 0]*deg)
SubtractAccessories := SubtractF(["Room"], "DeleteMe")
Room := stack(RoomLyr, RoomBox, HatchLedge, RoomFrz, HatchLedgeCut, WindowLower, WindowUpper, RoomSlope, GroupDelete, SubtractAccessories)
DoorLyr := layer_new("Door", red)
DoorBox := BoxSUBF([-W_ChemPlatform; W_Wall; H_Wall + T_TankWall + 6 cm] + Tank_Origin, [-W_ChemPlatform + 50 cm; T_TankWall + W_Wall; H_Wall + T_TankWall + 6.5 ft] + Tank_Origin, [0; 0; 0]*deg, ["Room"])
DoorFrz := FreezeLayer("Door")
Door := stack(DoorLyr, DoorBox, DoorFrz)
RoofLyr := layer_new("Roof", purple)
AN_Roof := atan((H_RoomTall - H_RoomShort)/(L_Wall + 2*T_TankWall))
L_RoofLong := 2*L_RoofOverhang + (H_RoomTall - H_RoomShort)/sin(AN_Roof)
RoofBox := BoxF(Tank_Origin + [
    T_TankWall + L_RoofOverhang*cos(AN_Roof);
    W_Wall + T_TankWall + L_RoofOverhang;
    H_RoomTall + H_Wall + T_TankWall + L_RoofOverhang*sin(AN_Roof)
], Tank_Origin + [
    T_TankWall + L_RoofOverhang*cos(AN_Roof) - L_RoofLong;
    -T_TankWall - L_RoofOverhang;
    H_RoomTall + H_Wall + T_TankWall + L_RoofOverhang*sin(AN_Roof) + zc
], [0; -AN_Roof; 0])
FrzRoof := FreezeLayer("Roof")
Roof := stack(RoofLyr, RoofBox, FrzRoof)
Facility := stack(Room, Door, Roof)
# Modular Stand
StandPlatformLyr := layer_new("StandPlatform", yellow)
Stand_UpperPlatform := BoxF(Origin_UpperPlatform, Origin_UpperPlatform + [-L_ChemPlatform; W_ChemPlatform; T_MS], [0; 0; 0])
Stand_LowerPlatform := BoxF(Origin_LowerPlatform, Origin_LowerPlatform + [-L_ChemPlatform; W_ChemPlatform; T_MS], [0; 0; 0])
StandPlatformFrz := FreezeLayer("StandPlatform")
PanelScrewHoles := CylinderF([-W_SquarePipe - L_PMB/2; W_SquarePipe + W_PMB/2; T_MS] + Origin_LowerPlatform, D_PMBHole/2, T_MS, [0; 270; 0]*deg)
ArrayPanelHoleHoriz := ArrayAllGen(2, 2, W_ChemPlatform - 2*W_SquarePipe - W_PMB, -(L_ChemPlatform - 2*W_SquarePipe - L_PMB))
ArrayPanelHoleVert := array_all(2, 1, Origin_UpperPlatform[2] - Origin_LowerPlatform[2])
StandDrain1Cut := BoxF([
    OD(ND_ChemDrain) + ChlorDrain1Bulkhead_Origin[0];
    OD(ND_ChemDrain) + ChlorDrain1Bulkhead_Origin[1];
    Origin_UpperPlatform[2]
], [
    -OD(ND_ChemDrain) + ChlorDrain1Bulkhead_Origin[0];
    -OD(ND_ChemDrain) + ChlorDrain1Bulkhead_Origin[1];
    Origin_UpperPlatform[2] + T_MS
], [0; 0; 0])
StandDrain2Cut := BoxF([
    OD(ND_ChemDrain) + ChlorDrain2Bulkhead_Origin[0];
    OD(ND_ChemDrain) + ChlorDrain2Bulkhead_Origin[1];
    Origin_UpperPlatform[2]
], [
    -OD(ND_ChemDrain) + ChlorDrain2Bulkhead_Origin[0];
    -OD(ND_ChemDrain) + ChlorDrain2Bulkhead_Origin[1];
    Origin_UpperPlatform[2] + T_MS
], [0; 0; 0])
StandLFOMEtDrainCut := BoxF([
    OR(ND_EtDrain) + EtDrainUnion_Origin[0] + S_Fitting/2;
    (OD(ND_RMPipe) + S_Fitting)/2 + LFOMunion_Origin[1];
    Origin_LowerPlatform[2]
], [
    -OR(ND_RMPipe) - S_Fitting/2 + LFOMunion_Origin[0];
    -1.5*OR(ND_RMPipe) + LFOMunion_Origin[1];
    Origin_LowerPlatform[2] + T_MS
], [0; 0; 0])
StandEtDrainValveCut := BoxF([
    OD(ND_EtMainDrain) + EtMainDrainCoupling_Origin[0];
    OD(ND_EtMainDrain) + EtMainDrainCoupling_Origin[1];
    Origin_LowerPlatform[2]
], [
    -OD(ND_EtMainDrain) + EtMainDrainCoupling_Origin[0];
    -OD(ND_EtMainDrain) + EtMainDrainCoupling_Origin[1];
    Origin_LowerPlatform[2] + T_MS
], [0; 0; 0])
SubtractCuts := SubtractF(["StandPlatform"], "DeleteMe")
StandPlatform := stack(StandPlatformLyr, Stand_UpperPlatform, Stand_LowerPlatform, StandPlatformFrz, PanelScrewHoles, ArrayPanelHoleHoriz, view("f"), ArrayPanelHoleVert, view("t"), StandDrain1Cut, StandDrain2Cut, StandLFOMEtDrainCut, StandEtDrainValveCut, GroupDelete, SubtractCuts)
PMBScrewLyr := layer_new("PanelMountBlockScrew", dkgrey)
PMBScrewThread := CylinderF([-W_SquarePipe - L_PMB/2; W_SquarePipe + W_PMB/2; -L_PMBHole] + Origin_LowerPlatform, D_PMBHole/2, T_MS + L_PMBHole, [0; 90; 0]*deg)
PMBScrewHead := CylinderF([-W_SquarePipe - L_PMB/2; W_SquarePipe + W_PMB/2; T_MS] + Origin_LowerPlatform, D_ScrewHead/2, T_ScrewHead, [0; 90; 0]*deg)
UnionScrew := Union_All
ArrayPanelScrewHoriz := ArrayAllGen(2, 2, W_ChemPlatform - 2*W_SquarePipe - W_PMB, -(L_ChemPlatform - 2*W_SquarePipe - L_PMB))
ArrayPanelScrewVert := array_all(2, 1, Origin_UpperPlatform[2] - Origin_LowerPlatform[2])
PMBScrewFrz := FreezeLayer("PanelMountBlockScrew")
PMBScrewScript := stack(PMBScrewLyr, PMBScrewThread, PMBScrewHead, UnionScrew, ArrayPanelScrewHoriz, view("f"), ArrayPanelScrewVert, view("t"), PMBScrewFrz)
StandLegsLyr := layer_new("Stand", red)
StandHorizBotFrontLeg := BoxF([
    Origin_LowerPlatform[0] - W_SquarePipe;
    Origin_LowerPlatform[1] + W_ChemPlatform;
    Origin_LowerPlatform[2]
], [
    Origin_LowerPlatform[0] - L_ChemPlatform + W_SquarePipe;
    Origin_LowerPlatform[1] + W_ChemPlatform - W_SquarePipe;
    Origin_LowerPlatform[2] - W_SquarePipe
], [0; 0; 0])
ArrayHorizBotFrontLegXY := ArrayLast(2, 1, -(W_ChemPlatform - W_SquarePipe))
StandHorizBotRightLeg := BoxF([
    Origin_LowerPlatform[0] - W_SquarePipe;
    Origin_LowerPlatform[1] + W_SquarePipe;
    Origin_LowerPlatform[2]
], [
    Origin_LowerPlatform[0];
    Origin_LowerPlatform[1] + W_ChemPlatform - W_SquarePipe;
    Origin_LowerPlatform[2] - W_SquarePipe
], [0; 0; 0])
ArrayHorizBotRightLegXY := ArrayLast(1, 2, -(L_ChemPlatform - W_SquarePipe))
ArrayHorizLegs := array_all(2, 1, Origin_UpperPlatform[2] - Origin_LowerPlatform[2])
CrossBarUpper1L := BoxF([
    ChlorTank1_Origin[0] - D_ChlorineTank/4;
    Origin_UpperPlatform[1] + W_SquarePipe;
    Origin_UpperPlatform[2]
], [
    ChlorTank1_Origin[0] - D_ChlorineTank/4 - W_SquarePipe;
    Origin_UpperPlatform[1] + W_ChemPlatform - W_SquarePipe;
    Origin_UpperPlatform[2] - W_SquarePipe
], [0; 0; 0])
CrossBarUpper1R := BoxF([
    ChlorTank1_Origin[0] + D_ChlorineTank/4;
    Origin_UpperPlatform[1] + W_SquarePipe;
    Origin_UpperPlatform[2]
], [
    ChlorTank1_Origin[0] + D_ChlorineTank/4 + W_SquarePipe;
    Origin_UpperPlatform[1] + W_ChemPlatform - W_SquarePipe;
    Origin_UpperPlatform[2] - W_SquarePipe
], [0; 0; 0])
CrossBarUpper2L := BoxF([
    ChlorTank2_Origin[0] - D_ChlorineTank/4;
    Origin_UpperPlatform[1] + W_SquarePipe;
    Origin_UpperPlatform[2]
], [
    ChlorTank2_Origin[0] - D_ChlorineTank/4 - W_SquarePipe;
    Origin_UpperPlatform[1] + W_ChemPlatform - W_SquarePipe;
    Origin_UpperPlatform[2] - W_SquarePipe
], [0; 0; 0])
CrossBarUpper2R := BoxF([
    ChlorTank2_Origin[0] + D_ChlorineTank/4;
    Origin_UpperPlatform[1] + W_SquarePipe;
    Origin_UpperPlatform[2]
], [
    ChlorTank2_Origin[0] + D_ChlorineTank/4 + W_SquarePipe;
    Origin_UpperPlatform[1] + W_ChemPlatform - W_SquarePipe;
    Origin_UpperPlatform[2] - W_SquarePipe
], [0; 0; 0])
CrossBarLowerR := BoxF([
    (OR(ND_EtDrain) + EtDrainUnion_Origin[0] + S_Fitting/2 + (-OD(ND_EtMainDrain) + EtMainDrainCoupling_Origin[0]) + W_SquarePipe)/2;
    Origin_UpperPlatform[1] + W_SquarePipe;
    Origin_LowerPlatform[2]
], [
    (OR(ND_EtDrain) + EtDrainUnion_Origin[0] + S_Fitting/2 + (-OD(ND_EtMainDrain) + EtMainDrainCoupling_Origin[0]) - W_SquarePipe)/2;
    Origin_UpperPlatform[1] + W_ChemPlatform - W_SquarePipe;
    Origin_LowerPlatform[2] - W_SquarePipe
], [0; 0; 0])
CrossBarLowerL := BoxF([
    -OR(ND_RMPipe) - S_Fitting + LFOMunion_Origin[0] - W_SquarePipe;
    Origin_UpperPlatform[1] + W_SquarePipe;
    Origin_LowerPlatform[2]
], [
    -OR(ND_RMPipe) - S_Fitting + LFOMunion_Origin[0];
    Origin_UpperPlatform[1] + W_ChemPlatform - W_SquarePipe;
    Origin_LowerPlatform[2] - W_SquarePipe
], [0; 0; 0])
StandBotRBackLeg := BoxSUBF(Origin_LowerPlatform + [0; 0; T_MS], [Origin_LowerPlatform[0] - W_SquarePipe; Origin_LowerPlatform[1] + W_SquarePipe; Room_Origin[2]], [0; 0; 0], ["StandPlatform"])
StandBotLBackLeg := BoxSUBF([Origin_LowerPlatform[0] - L_ChemPlatform; Origin_LowerPlatform[1]; Origin_LowerPlatform[2] + T_MS], [
    Origin_LowerPlatform[0] - L_ChemPlatform + W_SquarePipe;
    Origin_LowerPlatform[1] + W_SquarePipe;
    Room_Origin[2]
], [0; 0; 0], ["StandPlatform"])
StandBotRFrontLeg := BoxSUBF([Origin_LowerPlatform[0]; Origin_LowerPlatform[1] + W_ChemPlatform; Origin_LowerPlatform[2] + T_MS], [
    Origin_LowerPlatform[0] - W_SquarePipe;
    Origin_LowerPlatform[1] + W_ChemPlatform - W_SquarePipe;
    Room_Origin[2]
], [0; 0; 0], ["StandPlatform"])
StandBotLFrontLeg := BoxSUBF([
    Origin_LowerPlatform[0] - L_ChemPlatform;
    Origin_LowerPlatform[1] + W_ChemPlatform;
    Origin_LowerPlatform[2] + T_MS
], [
    Origin_LowerPlatform[0] - L_ChemPlatform + W_SquarePipe;
    Origin_LowerPlatform[1] + W_ChemPlatform - W_SquarePipe;
    Room_Origin[2]
], [0; 0; 0], ["StandPlatform"])
StandTopRBackLeg := BoxF(Origin_LowerPlatform + [0; 0; T_MS], [
    Origin_LowerPlatform[0] - W_SquarePipe;
    Origin_LowerPlatform[1] + W_SquarePipe;
    Origin_UpperPlatform[2]
], [0; 0; 0])
StandTopLBackLeg := BoxF([Origin_LowerPlatform[0] - L_ChemPlatform; Origin_LowerPlatform[1]; Origin_LowerPlatform[2] + T_MS], [
    Origin_LowerPlatform[0] - L_ChemPlatform + W_SquarePipe;
    Origin_LowerPlatform[1] + W_SquarePipe;
    Origin_UpperPlatform[2]
], [0; 0; 0])
StandTopRFrontLeg := BoxF([Origin_LowerPlatform[0]; Origin_LowerPlatform[1] + W_ChemPlatform; Origin_LowerPlatform[2] + T_MS], [
    Origin_LowerPlatform[0] - W_SquarePipe;
    Origin_LowerPlatform[1] + W_ChemPlatform - W_SquarePipe;
    Origin_UpperPlatform[2]
], [0; 0; 0])
StandTopLFrontLeg := BoxF([
    Origin_LowerPlatform[0] - L_ChemPlatform;
    Origin_LowerPlatform[1] + W_ChemPlatform;
    Origin_LowerPlatform[2] + T_MS
], [
    Origin_LowerPlatform[0] - L_ChemPlatform + W_SquarePipe;
    Origin_LowerPlatform[1] + W_ChemPlatform - W_SquarePipe;
    Origin_UpperPlatform[2]
], [0; 0; 0])
StandLegsFrz := FreezeLayer("Stand")
StandLegs := stack(StandLegsLyr, StandHorizBotFrontLeg, ArrayHorizBotFrontLegXY, StandHorizBotRightLeg, ArrayHorizBotRightLegXY, view("f"), ArrayHorizLegs, view("t"), CrossBarUpper1L, CrossBarUpper1R, CrossBarUpper2L, CrossBarUpper2R, CrossBarLowerR, CrossBarLowerL, StandBotRBackLeg, StandBotLBackLeg, StandBotLFrontLeg, StandBotRFrontLeg, StandTopRBackLeg, StandTopLBackLeg, StandTopRFrontLeg, StandTopLFrontLeg, StandLegsFrz)
CornerBracketLayer := layer_new("CornerBracket", grey)
FrontRightBracketX := BoxF([-W_SquarePipe; W_ChemPlatform - W_SquarePipe/2 + W_CB/2; -W_SquarePipe] + Origin_LowerPlatform, [-W_SquarePipe - L_CB; W_ChemPlatform - W_SquarePipe/2 - W_CB/2; -W_SquarePipe - L_CB] + Origin_LowerPlatform, [0; 0; 0]*deg)
CBFreeze := FreezeLayer("CornerBracket")
CBCut := BoxF([-W_SquarePipe - T_CB; W_ChemPlatform - W_SquarePipe/2 + W_CB/2; -W_SquarePipe - T_CB] + Origin_LowerPlatform, [-W_SquarePipe - L_CB; W_ChemPlatform - W_SquarePipe/2 - W_CB/2; -W_SquarePipe - L_CB] + Origin_LowerPlatform, [0; 0; 0]*deg)
CBHoleXR := CylinderF([-W_SquarePipe - L_CBHoleOffset; W_ChemPlatform - W_SquarePipe/2; -W_SquarePipe] + Origin_LowerPlatform, D_CBHole/2, T_CB, [0; 270; 0]*deg)
CBHoleXL := CylinderF([-W_SquarePipe - L_CBHoleOffset - B_CBHole; W_ChemPlatform - W_SquarePipe/2; -W_SquarePipe] + Origin_LowerPlatform, D_CBHole/2, T_CB, [0; 270; 0]*deg)
CBHoleZUp := CylinderF([-W_SquarePipe; W_ChemPlatform - W_SquarePipe/2; -W_SquarePipe - L_CBHoleOffset] + Origin_LowerPlatform, D_CBHole/2, T_CB, [0; 0; 0]*deg)
CBHoleZLow := CylinderF([-W_SquarePipe; W_ChemPlatform - W_SquarePipe/2; -W_SquarePipe - L_CBHoleOffset - B_CBHole] + Origin_LowerPlatform, D_CBHole/2, T_CB, [0; 0; 0]*deg)
CBDelete := SubtractF(["CornerBracket"], "DeleteMe")
ThawCB := SelectLayer("CornerBracket")
MirrorBracket := MirrorAll([Origin_LowerPlatform[0]; W_ChemPlatform + Origin_LowerPlatform[1]], [-zc + Origin_LowerPlatform[0]; W_ChemPlatform - zc + Origin_LowerPlatform[1]], "n")
MirrorBracketX := MirrorAll([Origin_LowerPlatform[0]; W_ChemPlatform/2 + Origin_LowerPlatform[1]], [-zc + Origin_LowerPlatform[0]; W_ChemPlatform/2 + Origin_LowerPlatform[1]], "n")
MirrorBracketY := MirrorAll([-L_ChemPlatform/2 + Origin_LowerPlatform[0]; W_ChemPlatform + Origin_LowerPlatform[1]], [-L_ChemPlatform/2 + Origin_LowerPlatform[0]; W_ChemPlatform - zc + Origin_LowerPlatform[1]], "n")
ArrayBrackets := array_all(2, 1, Origin_UpperPlatform[2] - Origin_LowerPlatform[2])
CBOuters := stack(CornerBracketLayer, FrontRightBracketX, CBFreeze, CBCut, CBHoleXR, CBHoleXL, CBHoleZUp, CBHoleZLow, GroupDelete, CBDelete, ThawCB, MirrorBracket, MirrorBracketX, MirrorBracketY, view("f"), ArrayBrackets, view("t"), CBFreeze)
CBInnerUpLayer := layer_new("CornerBracketInnerUp", grey)
UpperFrontBracketL := BoxF([
    ChlorTank2_Origin[0] - D_ChlorineTank/4 - W_SquarePipe;
    Origin_UpperPlatform[1] + W_ChemPlatform - W_SquarePipe;
    Origin_UpperPlatform[2] - W_SquarePipe/2 + W_CB/2
], [
    ChlorTank2_Origin[0] - D_ChlorineTank/4 - W_SquarePipe - L_CB;
    Origin_UpperPlatform[1] + W_ChemPlatform - W_SquarePipe - L_CB;
    Origin_UpperPlatform[2] - W_SquarePipe/2 - W_CB/2
], [0; 0; 0])
UpperBackBracketL := BoxF([
    ChlorTank2_Origin[0] - D_ChlorineTank/4;
    Origin_UpperPlatform[1] + W_SquarePipe;
    Origin_UpperPlatform[2] - W_SquarePipe/2 + W_CB/2
], [
    ChlorTank2_Origin[0] - D_ChlorineTank/4 + L_CB;
    (Origin_UpperPlatform[1] + W_SquarePipe) + L_CB;
    Origin_UpperPlatform[2] - W_SquarePipe/2 - W_CB/2
], [0; 0; 0])
CBInnerUpFreeze := FreezeLayer("CornerBracketInnerUp")
UFBCBCut := BoxF([
    ChlorTank2_Origin[0] - D_ChlorineTank/4 - W_SquarePipe - T_CB;
    Origin_UpperPlatform[1] + W_ChemPlatform - W_SquarePipe - T_CB;
    Origin_UpperPlatform[2] - W_SquarePipe/2 + W_CB/2
], [
    ChlorTank2_Origin[0] - D_ChlorineTank/4 - W_SquarePipe - L_CB;
    Origin_UpperPlatform[1] + W_ChemPlatform - W_SquarePipe - L_CB;
    Origin_UpperPlatform[2] - W_SquarePipe/2 - W_CB/2
], [0; 0; 0])
UBBCBCut := BoxF([
    ChlorTank2_Origin[0] - D_ChlorineTank/4 + T_CB;
    Origin_UpperPlatform[1] + W_SquarePipe + T_CB;
    Origin_UpperPlatform[2] - W_SquarePipe/2 + W_CB/2
], [
    ChlorTank2_Origin[0] - D_ChlorineTank/4 + L_CB;
    (Origin_UpperPlatform[1] + W_SquarePipe) + L_CB;
    Origin_UpperPlatform[2] - W_SquarePipe/2 - W_CB/2
], [0; 0; 0])
UFBCBHoleY1 := CylinderF([
    ChlorTank2_Origin[0] - D_ChlorineTank/4 - W_SquarePipe;
    Origin_UpperPlatform[1] + W_ChemPlatform - W_SquarePipe - L_CBHoleOffset;
    Origin_UpperPlatform[2] - W_SquarePipe/2
], D_CBHole/2, T_CB, [0; 0; 0])
UFBCBHoleY2 := CylinderF([
    ChlorTank2_Origin[0] - D_ChlorineTank/4 - W_SquarePipe;
    Origin_UpperPlatform[1] + W_ChemPlatform - W_SquarePipe - L_CBHoleOffset - B_CBHole;
    Origin_UpperPlatform[2] - W_SquarePipe/2
], D_CBHole/2, T_CB, [0; 0; 0])
UBBCBHoleY1 := CylinderF([
    ChlorTank2_Origin[0] - D_ChlorineTank/4 + T_CB;
    Origin_UpperPlatform[1] + W_SquarePipe + L_CBHoleOffset;
    Origin_UpperPlatform[2] - W_SquarePipe/2
], D_CBHole/2, T_CB, [0; 0; 0])
UBBCBHoleY2 := CylinderF([
    ChlorTank2_Origin[0] - D_ChlorineTank/4 + T_CB;
    Origin_UpperPlatform[1] + W_SquarePipe + L_CBHoleOffset + B_CBHole;
    Origin_UpperPlatform[2] - W_SquarePipe/2
], D_CBHole/2, T_CB, [0; 0; 0])
UFBCBHoleX1 := CylinderF([
    ChlorTank2_Origin[0] - D_ChlorineTank/4 - W_SquarePipe - L_CBHoleOffset;
    Origin_UpperPlatform[1] + W_ChemPlatform - W_SquarePipe;
    Origin_UpperPlatform[2] - W_SquarePipe/2
], D_CBHole/2, T_CB, [90; 0; 0]*deg)
UFBCBHoleX2 := CylinderF([
    ChlorTank2_Origin[0] - D_ChlorineTank/4 - W_SquarePipe - L_CBHoleOffset - B_CBHole;
    Origin_UpperPlatform[1] + W_ChemPlatform - W_SquarePipe;
    Origin_UpperPlatform[2] - W_SquarePipe/2
], D_CBHole/2, T_CB, [90; 0; 0]*deg)
UBBCBHoleX1 := CylinderF([
    ChlorTank2_Origin[0] - D_ChlorineTank/4 + L_CBHoleOffset;
    Origin_UpperPlatform[1] + W_SquarePipe + T_CB;
    Origin_UpperPlatform[2] - W_SquarePipe/2
], D_CBHole/2, T_CB, [90; 0; 0]*deg)
UBBCBHoleX2 := CylinderF([
    ChlorTank2_Origin[0] - D_ChlorineTank/4 + L_CBHoleOffset + B_CBHole;
    Origin_UpperPlatform[1] + W_SquarePipe + T_CB;
    Origin_UpperPlatform[2] - W_SquarePipe/2
], D_CBHole/2, T_CB, [90; 0; 0]*deg)
CrossBarCBSubtract := SubtractF(["CornerBracketInnerUp"], "DeleteMe")
ThawUpCBInner := SelectLayer("CornerBracketInnerUp")
ArrayCBLeftSide := array_all(1, 2, D_ChlorineTank/2 + W_SquarePipe)
MirrorCBAcross := MirrorAll([Origin_UpperPlatform[0] - L_ChemPlatform/2; Origin_UpperPlatform[1]], [Origin_UpperPlatform[0] - L_ChemPlatform/2; Origin_UpperPlatform[1] + zc], "n")
CBUpInners := stack(CBInnerUpLayer, UpperFrontBracketL, UpperBackBracketL, CBInnerUpFreeze, UFBCBCut, UBBCBCut, UFBCBHoleY1, UFBCBHoleY2, UBBCBHoleY1, UBBCBHoleY2, UFBCBHoleX1, UFBCBHoleX2, UBBCBHoleX1, UBBCBHoleX2, GroupDelete, CrossBarCBSubtract, ThawUpCBInner, ArrayCBLeftSide, MirrorCBAcross, CBInnerUpFreeze)
CBLowLayer := layer_new("CornerBracketLower", grey)
LowerFrontBracketL := BoxF([
    -OR(ND_RMPipe) - S_Fitting + LFOMunion_Origin[0] - W_SquarePipe;
    Origin_LowerPlatform[1] + W_ChemPlatform - W_SquarePipe;
    Origin_LowerPlatform[2] - W_SquarePipe/2 + W_CB/2
], [
    -OR(ND_RMPipe) - S_Fitting + LFOMunion_Origin[0] - W_SquarePipe - L_CB;
    Origin_LowerPlatform[1] + W_ChemPlatform - W_SquarePipe - L_CB;
    Origin_LowerPlatform[2] - W_SquarePipe/2 - W_CB/2
], [0; 0; 0])
LowerBackBracketL := BoxF([
    -OR(ND_RMPipe) - S_Fitting + LFOMunion_Origin[0];
    Origin_LowerPlatform[1] + W_SquarePipe;
    Origin_LowerPlatform[2] - W_SquarePipe/2 + W_CB/2
], [
    -OR(ND_RMPipe) - S_Fitting + LFOMunion_Origin[0] + L_CB;
    (Origin_LowerPlatform[1] + W_SquarePipe) + L_CB;
    Origin_LowerPlatform[2] - W_SquarePipe/2 - W_CB/2
], [0; 0; 0])
CBLowFrz := FreezeLayer("CornerBracketLower")
LFBCBCut := BoxF([
    -OR(ND_RMPipe) - S_Fitting + LFOMunion_Origin[0] - W_SquarePipe - T_CB;
    Origin_LowerPlatform[1] + W_ChemPlatform - W_SquarePipe - T_CB;
    Origin_LowerPlatform[2] - W_SquarePipe/2 + W_CB/2
], [
    -OR(ND_RMPipe) - S_Fitting + LFOMunion_Origin[0] - W_SquarePipe - L_CB;
    Origin_LowerPlatform[1] + W_ChemPlatform - W_SquarePipe - L_CB;
    Origin_LowerPlatform[2] - W_SquarePipe/2 - W_CB/2
], [0; 0; 0])
LBBCBCut := BoxF([
    -OR(ND_RMPipe) - S_Fitting + LFOMunion_Origin[0] + T_CB;
    Origin_LowerPlatform[1] + W_SquarePipe + T_CB;
    Origin_LowerPlatform[2] - W_SquarePipe/2 + W_CB/2
], [
    -OR(ND_RMPipe) - S_Fitting + LFOMunion_Origin[0] + L_CB;
    Origin_LowerPlatform[1] + W_SquarePipe + L_CB;
    Origin_LowerPlatform[2] - W_SquarePipe/2 - W_CB/2
], [0; 0; 0])
LFBCBHoleY1 := CylinderF([
    -OR(ND_RMPipe) - S_Fitting + LFOMunion_Origin[0] - W_SquarePipe;
    Origin_LowerPlatform[1] + W_ChemPlatform - W_SquarePipe - L_CBHoleOffset;
    Origin_LowerPlatform[2] - W_SquarePipe/2
], D_CBHole/2, T_CB, [0; 0; 0])
LFBCBHoleY2 := CylinderF([
    -OR(ND_RMPipe) - S_Fitting + LFOMunion_Origin[0] - W_SquarePipe;
    Origin_LowerPlatform[1] + W_ChemPlatform - W_SquarePipe - L_CBHoleOffset - B_CBHole;
    Origin_LowerPlatform[2] - W_SquarePipe/2
], D_CBHole/2, T_CB, [0; 0; 0])
LBBCBHoleY1 := CylinderF([
    -OR(ND_RMPipe) - S_Fitting + LFOMunion_Origin[0] + T_CB;
    Origin_LowerPlatform[1] + W_SquarePipe + L_CBHoleOffset;
    Origin_LowerPlatform[2] - W_SquarePipe/2
], D_CBHole/2, T_CB, [0; 0; 0])
LBBCBHoleY2 := CylinderF([
    -OR(ND_RMPipe) - S_Fitting + LFOMunion_Origin[0] + T_CB;
    Origin_LowerPlatform[1] + W_SquarePipe + L_CBHoleOffset + B_CBHole;
    Origin_LowerPlatform[2] - W_SquarePipe/2
], D_CBHole/2, T_CB, [0; 0; 0])
LFBCBHoleX1 := CylinderF([
    -OR(ND_RMPipe) - S_Fitting + LFOMunion_Origin[0] - W_SquarePipe - L_CBHoleOffset;
    Origin_LowerPlatform[1] + W_ChemPlatform - W_SquarePipe;
    Origin_LowerPlatform[2] - W_SquarePipe/2
], D_CBHole/2, T_CB, [90; 0; 0]*deg)
LFBCBHoleX2 := CylinderF([
    -OR(ND_RMPipe) - S_Fitting + LFOMunion_Origin[0] - W_SquarePipe - L_CBHoleOffset - B_CBHole;
    Origin_LowerPlatform[1] + W_ChemPlatform - W_SquarePipe;
    Origin_LowerPlatform[2] - W_SquarePipe/2
], D_CBHole/2, T_CB, [90; 0; 0]*deg)
LBBCBHoleX1 := CylinderF([
    -OR(ND_RMPipe) - S_Fitting + LFOMunion_Origin[0] + L_CBHoleOffset;
    Origin_LowerPlatform[1] + W_SquarePipe + T_CB;
    Origin_LowerPlatform[2] - W_SquarePipe/2
], D_CBHole/2, T_CB, [90; 0; 0]*deg)
LBBCBHoleX2 := CylinderF([
    -OR(ND_RMPipe) - S_Fitting + LFOMunion_Origin[0] + L_CBHoleOffset + B_CBHole;
    Origin_LowerPlatform[1] + W_SquarePipe + T_CB;
    Origin_LowerPlatform[2] - W_SquarePipe/2
], D_CBHole/2, T_CB, [90; 0; 0]*deg)
SubtractCBLowers := SubtractF(["CornerBracketLower"], "DeleteMe")
SelectCBLowers := SelectLayer("CornerBracketLower")
MirrorBracketLowers := MirrorAll([
    0.5*(-OR(ND_RMPipe) - S_Fitting + LFOMunion_Origin[0] - W_SquarePipe + (OR(ND_EtDrain) + EtDrainUnion_Origin[0] + S_Fitting/2 + (-OD(ND_EtMainDrain) + EtMainDrainCoupling_Origin[0]) + W_SquarePipe)/2);
    Origin_LowerPlatform[1]
], [
    0.5*(-OR(ND_RMPipe) - S_Fitting + LFOMunion_Origin[0] - W_SquarePipe + (OR(ND_EtDrain) + EtDrainUnion_Origin[0] + S_Fitting/2 + (-OD(ND_EtMainDrain) + EtMainDrainCoupling_Origin[0]) + W_SquarePipe)/2);
    zc + Origin_LowerPlatform[1]
], "n")
CBLowInners := stack(CBLowLayer, LowerFrontBracketL, LowerBackBracketL, CBLowFrz, LFBCBCut, LBBCBCut, LFBCBHoleY1, LFBCBHoleY2, LBBCBHoleY1, LBBCBHoleY2, LFBCBHoleX1, LFBCBHoleX2, LBBCBHoleX1, LBBCBHoleX2, GroupDelete, SubtractCBLowers, SelectCBLowers, MirrorBracketLowers, CBLowFrz)
FlatPlateLyr := layer_new("FlatPlate", grey)
BackRightPlate := BoxF([(-W_SquarePipe - W_FlatPlate)/2; -T_FP; H_FlatPlate/2] + Origin_LowerPlatform, [-W_SquarePipe/2 + W_FlatPlate/2; 0; -H_FlatPlate/2] + Origin_LowerPlatform, [0; 0; 0])
FlatPlateFrz := FreezeLayer("FlatPlate")
FlatPlateHoleLow := CylinderF([-W_SquarePipe/2; 0; -H_FlatPlate/2 + L_FPHoleOffset] + Origin_LowerPlatform, D_FlatPlateHole/2, T_FP, [90; 0; 0]*deg)
ArrayFPHole := array_all(3, 1, B_FPHole)
SubtractFPHoles := SubtractF(["FlatPlate"], "DeleteMe")
SelectFP := SelectLayer("FlatPlate")
ArrayFP := ArrayAllGen(2, 2, W_ChemPlatform + T_FP, -L_ChemPlatform + W_SquarePipe)
FlatPlateScript := stack(FlatPlateLyr, BackRightPlate, FlatPlateFrz, FlatPlateHoleLow, view("f"), ArrayFPHole, view("t"), GroupDelete, SubtractFPHoles, SelectFP, ArrayFP, FlatPlateFrz)
CBScript := stack(CBOuters, CBUpInners, CBLowInners)
PanelMountBlockLyr := layer_new("PanelMountBlock", grey)
LowBackRPMB := BoxF([-W_SquarePipe; W_SquarePipe; 0] + Origin_LowerPlatform, [-W_SquarePipe - L_PMB; W_SquarePipe + W_PMB; -H_PMB] + Origin_LowerPlatform, [0; 0; 0])
PMBFrz := FreezeLayer("PanelMountBlock")
LowBackRPMBHole := CylinderF([-W_SquarePipe - L_PMB/2; W_SquarePipe + W_PMB/2; 0] + Origin_LowerPlatform, D_PMBHole/2, L_PMBHole, [0; 270; 0]*deg)
SubtractPMBHole := SubtractF(["PanelMountBlock"], "DeleteMe")
SelectPMB := SelectLayer("PanelMountBlock")
ArrayPMBHoriz := ArrayAllGen(2, 2, W_ChemPlatform - 2*W_SquarePipe - W_PMB, -(L_ChemPlatform - 2*W_SquarePipe - L_PMB))
ArrayPMBVert := array_all(2, 1, Origin_UpperPlatform[2] - Origin_LowerPlatform[2])
PMBScript := stack(PanelMountBlockLyr, LowBackRPMB, PMBFrz, LowBackRPMBHole, GroupDelete, SubtractPMBHole, SelectPMB, ArrayPMBHoriz, view("f"), ArrayPMBVert, view("t"), PMBFrz)
LinearBearing_Origin := [
    -W_SquarePipe/2 + L_LB - L_LBScrewPlate/2 + Origin_LowerPlatform[0];
    W_ChemPlatform + Origin_LowerPlatform[1];
    Z_LeverArmFulcrum - H_CHT
]
LinearBearingLyr := layer_new("LinearBearing", grey)
LinearBearingBox := BoxF(LinearBearing_Origin, LinearBearing_Origin + [-L_LB; W_LB; -H_LB], [0; 0; 0]*deg)
LinearBearingFrz := FreezeLayer("LinearBearing")
LBCutBox := BoxF(LinearBearing_Origin + [-L_LB; W_LB; 0], LinearBearing_Origin + [-L_LB + L_LBScrewPlate; T_LBScrewPlate; -H_LB], [0; 0; 0]*deg)
LBSliderCut := BoxSUBF(LinearBearing_Origin + [0; T_LBScrewPlate; 0], LinearBearing_Origin + [-W_SquarePipe - T_LBScrewPlate*0.5; T_LBScrewPlate + W_SquarePipe; -H_LB], [0; 0; 0]*deg, ["LinearBearing"])
LBHoleLower := CylinderF(LinearBearing_Origin + [-L_LB + L_LBScrewPlate/2; 0; -H_LBScrewPlateOffset], D_LBHole/2, T_LBScrewPlate, [270; 0; 0]*deg)
LBHoleUpper := CylinderF(LinearBearing_Origin + [-L_LB + L_LBScrewPlate/2; 0; -(H_LBScrewPlateOffset + B_LBScrewPlateHole)], D_LBHole/2, T_LBScrewPlate, [270; 0; 0]*deg)
SubtractLB := SubtractF(["LinearBearing"], "DeleteMe")
LinearBearingScript := stack(LinearBearingLyr, LinearBearingBox, LinearBearingFrz, LBCutBox, LBSliderCut, LBHoleLower, LBHoleUpper, GroupDelete, SubtractLB)
H_CHTSlider := H_LB*3 + H_CHT + L_AP + S_Fitting = 0.420035 m
CHTSliderLyr := layer_new("CHTSlider", red)
CHTSlider := BoxSUBF([
    LinearBearing_Origin[0];
    T_LBScrewPlate + LinearBearing_Origin[1];
    Z_ChlorDeliveryCenterlineMin - OR_Fitting(ND_ChemPlu)
], [
    -W_SquarePipe + LinearBearing_Origin[0];
    T_LBScrewPlate + W_SquarePipe + LinearBearing_Origin[1];
    Z_ChlorDeliveryCenterlineMin - OR_Fitting(ND_ChemPlu) - H_CHTSlider
], [0; 0; 0]*deg, ["LinearBearing"])
CHTSliderFrz := FreezeLayer("CHTSlider")
CHTSliderScript := stack(CHTSliderLyr, CHTSlider, CHTSliderFrz)
AngledPlateLyr := layer_new("AngledPlate", grey)
AngledPlateBox := BoxF([
    LinearBearing_Origin[0] - W_SquarePipe/2 + L_APHoleOffset;
    LinearBearing_Origin[1] + T_LBScrewPlate + W_SquarePipe;
    H_CHT - S_FastenerFromTop + CHT_Origin[2] - L_APHoleOffset
], [
    LinearBearing_Origin[0] - W_SquarePipe/2 + L_APHoleOffset - L_AP;
    LinearBearing_Origin[1] + T_LBScrewPlate + W_SquarePipe + T_AP;
    H_CHT - S_FastenerFromTop + CHT_Origin[2] - L_APHoleOffset + L_AP
], [0; 0; 0]*deg)
AngledPlateFrz := FreezeLayer("AngledPlate")
AngledPlateCutBox := BoxF([
    LinearBearing_Origin[0] - W_SquarePipe/2 + L_APHoleOffset - L_APLedge;
    LinearBearing_Origin[1] + T_LBScrewPlate + W_SquarePipe;
    H_CHT - S_FastenerFromTop + CHT_Origin[2] - L_APHoleOffset + L_AP
], [
    LinearBearing_Origin[0] - W_SquarePipe/2 + L_APHoleOffset - L_APLedge - (L_AP - L_APLedge)*sqrt(2);
    LinearBearing_Origin[1] + T_LBScrewPlate + W_SquarePipe + T_AP;
    H_CHT - S_FastenerFromTop + CHT_Origin[2] - L_APHoleOffset + L_AP + (L_AP - L_APLedge)
], [0; -45; 0]*deg)
AngledPlateCornerHole := CylinderF([
    LinearBearing_Origin[0] - W_SquarePipe/2;
    LinearBearing_Origin[1] + T_LBScrewPlate + W_SquarePipe;
    H_CHT - S_FastenerFromTop + CHT_Origin[2]
], D_APHole/2, T_LBScrewPlate, [270; 0; 0]*deg)
ArrayAPHoleZ := ArrayLast(4, 1, B_APHole)
AngledPlateXHole := CylinderF([
    LinearBearing_Origin[0] - W_SquarePipe/2 - B_APHole;
    LinearBearing_Origin[1] + T_LBScrewPlate + W_SquarePipe;
    H_CHT - S_FastenerFromTop + CHT_Origin[2]
], D_APHole/2, T_LBScrewPlate, [270; 0; 0]*deg)
ArrayAPHoleX := ArrayLast(1, 3, -B_APHole)
SubtractAP := SubtractF(["AngledPlate"], "DeleteMe")
APScript := stack(AngledPlateLyr, AngledPlateBox, AngledPlateFrz, AngledPlateCutBox, AngledPlateCornerHole, view("f"), ArrayAPHoleZ, view("t"), AngledPlateXHole, ArrayAPHoleX, GroupDelete, SubtractAP)
APPVCScrewLyr := layer_new("AngledPlatePVCScrews", ltgrey)
APPVCScrewThread := CylinderF([
    LinearBearing_Origin[0] - W_SquarePipe/2 - B_APHole;
    LinearBearing_Origin[1] + T_LBScrewPlate + W_SquarePipe + T_CHT + T_AP;
    H_CHT - S_FastenerFromTop + CHT_Origin[2]
], D_PMBHole/2, T_CHT + T_AP, [90; 0; 0]*deg)
APPVCScrewHead := CylinderF([
    LinearBearing_Origin[0] - W_SquarePipe/2 - B_APHole;
    LinearBearing_Origin[1] + T_LBScrewPlate + W_SquarePipe + T_CHT + T_AP;
    H_CHT - S_FastenerFromTop + CHT_Origin[2]
], D_ScrewHead/2, T_ScrewHead, [270; 0; 0]*deg)
UnionScrew = "_union all "
ArrayAPPVCScrewHoleX := ArrayLast(1, 3, -B_APHole)
APPVCScrewFrz := FreezeLayer("AngledPlatePVCScrews")
APPVCScrewsScript := stack(APPVCScrewLyr, APPVCScrewThread, APPVCScrewHead, UnionScrew, ArrayAPPVCScrewHoleX, APPVCScrewFrz)
APScrewLyr := layer_new("AngledPlateScrew", grey)
APScrewThread := CylinderF([
    LinearBearing_Origin[0] - W_SquarePipe/2;
    LinearBearing_Origin[1] + T_LBScrewPlate + W_SquarePipe + T_CHT + T_AP;
    H_CHT - S_FastenerFromTop + CHT_Origin[2] + B_APHole
], D_PMBHole/2, T_CHT + T_AP, [90; 0; 0]*deg)
APScrewHead := CylinderF([
    LinearBearing_Origin[0] - W_SquarePipe/2;
    LinearBearing_Origin[1] + T_LBScrewPlate + W_SquarePipe + T_CHT + T_AP;
    H_CHT - S_FastenerFromTop + CHT_Origin[2] + B_APHole
], D_ScrewHead/2, T_ScrewHead, [270; 0; 0]*deg)
ArrayAPScrewZ := ArrayLast(3, 1, B_APHole)
APScrewFrz := FreezeLayer("AngledPlateScrew")
APScrewScript := stack(APScrewLyr, APScrewThread, APScrewHead, UnionScrew, view("ba"), ArrayAPScrewZ, view("t"), APScrewFrz)
StandScript := stack(StandPlatform, PMBScrewScript, StandLegs, CBScript, FlatPlateScript, PMBScript, LinearBearingScript, CHTSliderScript, APScript, APPVCScrewsScript, APScrewScript)
# [component: inputs StandScript]
# Entrance Tank and Details
# Required entrance tank offset ensures that the drop tube does not bump into the stand
FlowMeteringTankLyr := layer_new("FlowMeteringTank", grey)
FlowMeteringTank := Tank(FlowMeteringTank_Origin, [L_EtMin; W_EtMin; H_Et], T_Et)
FlowMeteringTankFrz := FreezeLayer("FlowMeteringTank")
FlowMetering := stack(FlowMeteringTankLyr, FlowMeteringTank, FlowMeteringTankFrz)
EtMainDrainFittingLyr := layer_new("ETMainDrainCoupling", green)
EtMainDrainCoupling := CouplingSUBF(EtMainDrainCoupling_Origin, [0; 270; 0]*deg, ND_EtMainDrain, PS_Fi, ["FlowMeteringTank"])
EtMainDrainValve := InsertDwg(BallValveDwg, [-EtMainDrainValve_Origin[0]; EtMainDrainValve_Origin[2]; EtMainDrainValve_Origin[1]], ND_EtMainDrain, 90 deg)
EtMainDrainFittingFrz := FreezeLayer("ETMainDrainCoupling")
EtMainDrainFitting := stack(EtMainDrainFittingLyr, EtMainDrainCoupling, view("ba"), EtMainDrainValve, view("t"), EtMainDrainFittingFrz)
EtMainDrainPipeLyr := layer_new("EtMainDrainPipe", blue)
EtMainDrainPipeDraw := PipeF(EtMainDrainValve_Origin, L_MainDrainValvePipe, [0; 90; 0]*deg, ND_EtMainDrain, PS_Fi)
EtMainDrainPipeFrz := FreezeLayer("EtMainDrainPipe")
EtMainDrainPipe := stack(EtMainDrainPipeLyr, EtMainDrainPipeDraw, EtMainDrainPipeFrz)
EtDrain := stack(EtMainDrainFitting, EtMainDrainPipe)
LFOMTankCoupling_Origin := [LFOMunion_Origin[0]; LFOMunion_Origin[1]; Room_Origin[2] - SocketDepth(ND_RMPipe)]
LFOMLowerUnion_Origin := LFOMTankCoupling_Origin + [0; 0; SocketDepth(ND_RMPipe) + L_LfomUnion - SD_LfomUnion] = [-0.6946; 0.371647; 9.91033] m
LFOMBarb_Origin := [
    LFOMunion_Origin[0] - OR(ND_RMPipe);
    LFOMunion_Origin[1];
    LFOMLowerUnion_Origin[2] - SD_LfomUnion + L_LfomUnion + S_Fitting/4
]
LFOMFitLyr := layer_new("LFOMFittings", green)
LFOMunion := UnionSUBF(LFOMunion_Origin, [0; 270]*deg, ND_RMPipe, PS_Fi, ["FlowMeteringTank"])
LFOMCoupling := CouplingSUBF(LFOMTankCoupling_Origin, [0; 270]*deg, ND_RMPipe, PS_Fi, ["Room"])
LFOMLowerUnion := UnionF(LFOMLowerUnion_Origin, [0; 270]*deg, ND_RMPipe, PS_Fi)
LFOMBarb := TBarbF(LFOMBarb_Origin, [180; 0; 0]*deg, ND_ChemPlu, D_LargeChlorineTubes, PS_Fi)
LFOMFitLyrFrz := FreezeLayer("LFOMFittings")
LFOMOrificePlateLyr := layer_new("LfomOrificePlate", red)
OrificePlate := CylinderF(LFOMLowerUnion_Origin, OR(ND_RMPipe), T_MS, [0; 90; 0]*deg)
LFOMOrificePlateFrz := FreezeLayer("LfomOrificePlate")
OrificePlateOrifice := CylinderF(LFOMLowerUnion_Origin, D_LfomOrificePlate/2, T_MS, [0; 90; 0]*deg)
SubtractOrificePlateOrifice := SubtractF(["LfomOrificePlate"], "DeleteMe")
LfomOrificePlate := stack(LFOMOrificePlateLyr, OrificePlate, LFOMOrificePlateFrz, OrificePlateOrifice, GroupDelete, SubtractOrificePlateOrifice)
LFOMFit := stack(LFOMFitLyr, LFOMunion, LFOMCoupling, LFOMLowerUnion, LFOMBarb, LFOMFitLyrFrz)
L_LFOMPipe := FlowMeteringTank_Origin[2] + H_Et - LFOMunion_Origin[2] - H_Freeboard = 0.185684 m
L_LFOMtoTank := LFOMunion_Origin[2] - LFOMLowerUnion_Origin[2] - T_MS - (L_LfomUnion - 2*SD_LfomUnion)
L_LFOMthroughWall := T_TankWall - CouplingLength(ND_RMPipe) + SocketDepth(ND_RMPipe)
LFOMthroughWall_Origin := LFOMTankCoupling_Origin + [0; 0; 2*SocketDepth(ND_RMPipe) - CouplingLength(ND_RMPipe)]
L_LfomLowerUnionToCoupling := LFOMLowerUnion_Origin[2] + 2*UnionSocketDepth(ND_RMPipe) - UnionLength(ND_RMPipe) - LFOMTankCoupling_Origin[2]
LFOMPipeLyr := layer_new("LFOMPlu", blue)
LFOMPipe := PipeF(LFOMunion_Origin + [0; 0; CouplingLength(ND_RMPipe) - 2*SocketDepth(ND_RMPipe)], L_LFOMPipe, [0; 90]*deg, ND_RMPipe, PS_Fi)
LFOMPluFrz := FreezeLayer("LFOMPlu")
# subtracting HL.EtOverflow is like adding freeboard more than anything since it's unlikely that the weir would be draining anything other than very small amounts
LFOMorifices :=
    Local ← stack(LFOMPipeLyr, LFOMPipe, LFOMPluFrz)
    for h ∈ 0 .. last(H_LfomOrifices)
        if N_LfomOrifices[h] ≠ 0
            Local ← stack(Local, CylinderF([
                LFOMunion_Origin[0];
                LFOMunion_Origin[1];
                FlowMeteringTank_Origin[2] + H_LfomOrifices[h] + L_LfomUnion - SD_LfomUnion/2 + H_EtFloat/2
            ], D_LfomOrifices/2, OR(ND_RMPipe) + zc, [
                (asin(0.5*S_LfomOrificesMin/OD(ND_RMPipe)) + asin(D_LfomOrifices/OD(ND_RMPipe)))*(mod(h, 2) == 0);
                0 deg
            ]))
        if N_LfomOrifices[h] > 1
            Local ← stack(Local, ArrayLastPolar([
                LFOMunion_Origin[0];
                LFOMunion_Origin[1];
                FlowMeteringTank_Origin[2] + L_LfomUnion - SD_LfomUnion/2 + H_EtFloat/2 + H_LfomOrifices[h]
            ], N_LfomOrifices[h], (N_LfomOrifices[h] - 1)*(2*asin(D_LfomOrifices/OD(ND_RMPipe)) + 2*asin(S_LfomOrificesMin/OD(ND_RMPipe)))))
    return Local
SubtractLFOMorifices := SubtractF(["LFOMPlu"], "DeleteMe")
LFOMPipeThaw := SelectLayer("LFOMPlu")
LFOMtoTank := PipeF(LFOMLowerUnion_Origin + [0; 0; T_MS], L_LFOMtoTank, [0; 90]*deg, ND_RMPipe, PS_Fi)
LFOMthroughWall := PipeSUBF(LFOMthroughWall_Origin, L_LFOMthroughWall, [0; 270]*deg, ND_RMPipe, PS_Fi, ["Room"])
LfomUnionToCoupling := PipeF(LFOMTankCoupling_Origin, L_LfomLowerUnionToCoupling, [0; 90]*deg, ND_RMPipe, PS_Fi)
LFOMPipes := stack(LFOMorifices, GroupDelete, SubtractLFOMorifices, LFOMPipeThaw, LFOMtoTank, LFOMthroughWall, LfomUnionToCoupling, LFOMPluFrz, LfomOrificePlate)
LFOMPlu := stack(LFOMFit, LFOMPipes)
EtDrainFittingLyr := layer_new("EtDrainFittings", green)
EtDrainUnion := UnionSUBF(EtDrainUnion_Origin, [0; 270; 0]*deg, ND_EtDrain, PS_Fi, ["FlowMeteringTank"])
EtDrainElbow := ElbowF(EtDrainElbow_Origin, [90; 270; 0]*deg, ND_EtDrain, PS_Fi)
D_LfomUnion = 0.146844 m
EtDrainFitFrz := FreezeLayer("EtDrainFittings")
EtDrainFit := stack(EtDrainFittingLyr, EtDrainUnion, EtDrainElbow, EtDrainFitFrz)
EtDrainPipesLyr := layer_new("EtDrainPipes", blue)
L_EtOverflowPipe := FlowMeteringTank_Origin[2] + L_LfomUnion - SD_LfomUnion/2 + H_EtFloat/2 + HL_Lfom - EtDrainUnion_Origin[2]
EtOverflowPipe := PipeF(EtDrainUnion_Origin + [0; 0; CouplingLength(ND_EtDrain) - 2*SocketDepth(ND_EtDrain)], L_EtOverflowPipe, [0; 90; 0]*deg, ND_EtDrain, PS_Fi)
EtDrainPipesFrz := FreezeLayer("EtDrainPipes")
EtDrainPipes := stack(EtDrainPipesLyr, EtOverflowPipe, EtDrainPipesFrz)
EtDrainPlumbing := stack(EtDrainFit, EtDrainPipes)
ND_DrumFill := 1 in
RawWaterInletTee_Origin := [
    Room_Origin[0] - OR_Fitting(ND_Transmission);
    FlowMeteringTank_Origin[1] + W_EtMin - S_Fitting/2 - D_DrainUnion/2;
    FlowMeteringTank_Origin[2] + H_Et + S_Fitting + OR_Fitting(ND_Transmission) + ShortTeeLength(ND_Transmission)
]
RawWaterInletReducer_Origin := RawWaterInletTee_Origin + [0; 0; 2*SocketDepth(ND_Transmission)]
DrumFillElbow_Origin := [
    RawWaterInletReducer_Origin[0];
    RawWaterInletReducer_Origin[1];
    ChlorTank1_Origin[2] + H_ChlorineTank + BallValveLength(ND_DrumFill) + S_Fitting + SocketDepth(ND_DrumFill)
]
DrumFillTee_Origin := [
    ChlorTank1_Origin[0];
    DrumFillElbow_Origin[1];
    DrumFillElbow_Origin[2] + ElbowRadius(ND_DrumFill) - ShortTeeLength(ND_DrumFill)
]
DrumFillElbow2_Origin := [ChlorTank2_Origin[0]; DrumFillElbow_Origin[1]; DrumFillElbow_Origin[2]]
DrumFillValve1_Origin := DrumFillTee_Origin + [0; 0; -SocketDepth(ND_DrumFill) - BallValveSocket(ND_DrumFill)]
DrumFillValve2_Origin := DrumFillElbow2_Origin + [0; 0; -SocketDepth(ND_DrumFill) - BallValveSocket(ND_DrumFill)]
RawWaterMTAr_Origin := RawWaterInletTee_Origin + [
    -ShortTeeLength(ND_Transmission) - 2*SocketDepth(ND_Transmission);
    0;
    -ShortTeeLength(ND_Transmission)
]
RawWaterGateValve_Origin := RawWaterMTAr_Origin + [SocketDepth(ND_Transmission) - MaleAdapterLength(ND_Transmission); 0; 0]
RawWaterMTAl_Origin := RawWaterGateValve_Origin + [
    -GateValveLength(ND_Transmission) + GateValveSocket(ND_Transmission) - MaleAdapterLength(ND_Transmission) + SocketDepth(ND_Transmission);
    0;
    0
]
RawWaterInletElbow_Origin := [
    FlowMeteringTank_Origin[0] - OR(ND_Transmission) + ElbowRadius(ND_Transmission) - S_Fitting/2;
    RawWaterMTAl_Origin[1];
    RawWaterMTAl_Origin[2]
]
RawWaterInletNipple_Origin := [ShortTeeLength(ND_Transmission); 0; -ShortTeeLength(ND_Transmission)] + RawWaterInletTee_Origin
RawWaterInletPipeVert_Origin := [-ElbowRadius(ND_Transmission); 0; -ElbowRadius(ND_Transmission)] + RawWaterInletElbow_Origin
L_RawWaterInletNipple := RawWaterInletNipple_Origin[0] - RawWaterInletElbow_Origin[0]
RawWaterInletFitLyr := layer_new("RawWaterInletFitPlu", green)
RawWaterInletTee := TeeSUBF(RawWaterInletTee_Origin, [0; 0; 90]*deg, ND_Transmission, PS_Fi, ["Room"])
RawWaterInletReducer := reducerF(RawWaterInletReducer_Origin, [0; 90; 0]*deg, ND_Transmission, ND_DrumFill, SocketDepth(ND_Transmission), PS_Fi)
DrumFillElbow := ElbowF(DrumFillElbow_Origin, [0; 0; 90]*deg, ND_DrumFill, PS_Fi)
DrumFillValve1 := InsertDwg(BallValveDwg, [-DrumFillValve1_Origin[0]; DrumFillValve1_Origin[2]; DrumFillValve1_Origin[1]], ND_DrumFill, 90 deg)
DrumFillTee := TeeF(DrumFillTee_Origin, [0; 0; 270]*deg, ND_DrumFill, PS_Fi)
DrumFillElbow2 := ElbowF(DrumFillElbow2_Origin, [180; 0; 270]*deg, ND_DrumFill, PS_Fi)
DrumFillValve2 := InsertDwg(BallValveDwg, [-DrumFillValve2_Origin[0]; DrumFillValve2_Origin[2]; DrumFillValve2_Origin[1]], ND_DrumFill, 90 deg)
RawWaterMTAr := MaleAdapterF(RawWaterMTAr_Origin, [0; 0; 0]*deg, ND_Transmission, PS_Fi)
RawWaterGateValve := InsertDwg(GateValveDwg, RawWaterGateValve_Origin, ND_Transmission, 0 deg)
RawWaterMTAl := MaleAdapterF(RawWaterMTAl_Origin, [180; 0; 0]*deg, ND_Transmission, PS_Fi)
RawWaterInletElbow := ElbowF(RawWaterInletElbow_Origin, [90; 0; 90]*deg, ND_Transmission, PS_Fi)
RawWaterInletFitFrz := FreezeLayer("RawWaterInletFitPlu")
ElbowCutBox := BoxF(RawWaterInletElbow_Origin + [
    0;
    -OR_Fitting(ND_Transmission) - S_Fitting;
    -ElbowRadius(ND_Transmission) - SocketDepth(ND_Transmission)*0.5
], RawWaterInletElbow_Origin + [
    -ElbowRadius(ND_Transmission) - OR_Fitting(ND_Transmission);
    OR_Fitting(ND_Transmission) + S_Fitting;
    -ElbowRadius(ND_Transmission) - SocketDepth(ND_Transmission)*1.1
], [0; 0; 0]*deg)
SubtractRawWaterInletElbow := SubtractF(["RawWaterInletFitPlu"], "DeleteMe")
RawWaterInletFit := stack(RawWaterInletFitLyr, RawWaterInletTee, RawWaterInletReducer, DrumFillElbow, DrumFillTee, DrumFillElbow2, view("ba"), DrumFillValve1, DrumFillValve2, view("t"), RawWaterMTAr, RawWaterGateValve, RawWaterMTAl, RawWaterInletElbow, RawWaterInletFitFrz, ElbowCutBox, GroupDelete, SubtractRawWaterInletElbow)
RawWaterInletPipeLyr := layer_new("RawWaterInletPlu", blue)
L_RawWaterInletPipe := T_TankWall*2
L_RawWaterInletX := RawWaterMTAl_Origin[0] - RawWaterInletElbow_Origin[0] = 0.103509 m
L_RawWaterInletPipeVert := RawWaterInletElbow_Origin[2] - FlowMeteringTank_Origin[2] - ElbowRadius(ND_Transmission) - 1 cm - SocketDepth(ND_Transmission)/2 = 0.25693 m
RawWaterInletPipe := PipeSUBF(RawWaterInletTee_Origin + [L_RawWaterInletPipe + ShortTeeLength(ND_Transmission); 0; -ShortTeeLength(ND_Transmission)], L_RawWaterInletPipe, [0; 0]*deg, ND_Transmission, PS_Fi, ["Room"])
RawWaterInletX := PipeF(RawWaterMTAl_Origin, L_RawWaterInletX, [0; 0]*deg, ND_Transmission, PS_Fi)
RawWaterInletVert := PipeF(RawWaterInletPipeVert_Origin, L_RawWaterInletPipeVert, [0; 270]*deg, ND_Transmission, PS_Fi)
L_DrumFillPipeVert := DrumFillElbow_Origin[2] - RawWaterInletReducer_Origin[2] - SocketDepth(ND_Transmission)
L_DrumFillPipeHoriz1 := DrumFillElbow_Origin[0] - DrumFillTee_Origin[0] - ElbowRadius(ND_DrumFill) - ShortTeeLength(ND_DrumFill) = 0.459938 m
L_DrumFillPipeHoriz2 := DrumFillTee_Origin[0] - DrumFillElbow2_Origin[0] - ElbowRadius(ND_DrumFill) - ShortTeeLength(ND_DrumFill)
DrumFillPipeVert := PipeF(DrumFillElbow_Origin, L_DrumFillPipeVert, [0; 270]*deg, ND_DrumFill, PS_Fi)
DrumFillPipeHoriz1 := PipeF(DrumFillElbow_Origin + [-ElbowRadius(ND_DrumFill); 0; ElbowRadius(ND_DrumFill)], L_DrumFillPipeHoriz1, [0; 0]*deg, ND_DrumFill, PS_Fi)
DrumFillPipeHoriz2 := PipeF(DrumFillTee_Origin + [-ShortTeeLength(ND_DrumFill); 0; ShortTeeLength(ND_DrumFill)], L_DrumFillPipeHoriz2, [0; 0]*deg, ND_DrumFill, PS_Fi)
RawWaterInletPipeFrz := FreezeLayer("RawWaterInletPlu")
RawWaterInletPipes := stack(RawWaterInletPipeLyr, RawWaterInletPipe, RawWaterInletX, RawWaterInletVert, DrumFillPipeVert, DrumFillPipeHoriz1, DrumFillPipeHoriz2, RawWaterInletPipeFrz)
RawWaterInlet := stack(RawWaterInletFit, RawWaterInletPipes)
EntranceDetails := stack(FlowMetering, RawWaterInlet, LFOMPlu, EtDrain, EtDrainPlumbing)
# Chemical Tank
# Constant Head Tank and calibration column
CHTInletBarb_Origin := CHT_Origin + [T_CHT; W_CHT/2; H_CHT - H_FloatValveFromTop] = [-0.283331; 0.738451; 10.8444] m
CHTLayer := layer_new("CHT", grey)
CHTBox := Tank(CHT_Origin, [L_CHT; W_CHT; H_CHT], T_CHT)
CHTFrz := FreezeLayer("CHT")
CHTScrewHole := CylinderF([
    LinearBearing_Origin[0] - W_SquarePipe/2 - B_APHole;
    LinearBearing_Origin[1] + T_LBScrewPlate + W_SquarePipe + T_CHT + T_AP;
    H_CHT - S_FastenerFromTop + CHT_Origin[2]
], D_PVCScrew/2, T_CHT, [90; 0; 0]*deg)
ArrayCHTHole := ArrayLast(1, 3, -B_APHole) = "-array l  R 1 3 -0.0254"
CHTBarbHole := CylinderF(CHTInletBarb_Origin, D_FloatValveThread/2, T_CHT, [0; 0; 0]*deg)
SubtractScrewHoles := SubtractF(["CHT"], "DeleteMe")
CHTScript := stack(CHTLayer, CHTBox, CHTFrz, CHTScrewHole, ArrayCHTHole, CHTBarbHole, GroupDelete, SubtractScrewHoles)
L_CalColPipe := H_ChlorCalCol + SocketDepth(ND_ChlorCalCol) + CapHeight(ND_ChlorCalCol)
CalColTee_Origin := ChlorElbowToCalCol_Origin + [ElbowRadius(ND_ChemPlu) + 2*SocketDepth(ND_ChemPlu); 0; -ElbowRadius(ND_ChemPlu)]
CalColMTALow_Origin := CalColTee_Origin + [ShortTeeLength(ND_ChemPlu); 0; ShortTeeLength(ND_ChemPlu) + 2*SocketDepth(ND_ChemPlu)]
CalColValve_Origin := CalColMTALow_Origin + [0; 0; -SocketDepth(ND_ChemPlu) + MaleAdapterLength(ND_ChemPlu)]
CalColMTAUp_Origin := CalColValve_Origin + [
    0;
    0;
    BallValveLength(ND_ChemPlu) - 2*BallValveSocket(ND_ChemPlu) + MaleAdapterLength(ND_ChemPlu) - SocketDepth(ND_ChemPlu)
]
CalColBushing_Origin := CalColMTAUp_Origin + [0; 0; SocketDepth(ND_ChemPlu) + SocketDepth(ND_ChlorCalCol)] = [-0.289681; 0.672499; 11.1761] m
CalColCoupling_Origin := CalColBushing_Origin
CalColCap_Origin := CalColCoupling_Origin + [0; 0; L_CalColPipe + CouplingLength(ND_ChlorCalCol) - 2*SocketDepth(ND_ChlorCalCol)]
ChlorDeliveryBarb_Origin := CalColTee_Origin + [ShortTeeLength(ND_ChemPlu); 0; -ShortTeeLength(ND_ChemPlu) - SocketDepth(ND_ChemPlu)]
CHTFloatValve_Origin := CHTInletBarb_Origin + [-T_CHT; 0; 0]
CHTOutletMTA_Origin := [
    CHT_Origin[0] - L_CHT;
    CHT_Origin[1] + OR_Fitting(ND_ChemPlu);
    CHT_Origin[2] + S_Fitting/2 + OR_Fitting(ND_ChemPlu)
]
CHTOutletFTA_Origin := CHTOutletMTA_Origin + [SocketDepth(ND_ChemPlu) - MaleAdapterLength(ND_ChemPlu); 0; 0]
CHTOutletElbow_Origin := CHTOutletFTA_Origin + [-CouplingLength(ND_ChemPlu); 0; 0]
CHTOutletUnion_Origin := CHTOutletElbow_Origin + [-ElbowRadius(ND_ChemPlu); 0; -ElbowRadius(ND_ChemPlu) - 2*SocketDepth(ND_ChemPlu)]
CHTDrainCoupling_Origin := CHT_Origin + [OR_Fitting(ND_ChemPlu) - L_CHT + S_Fitting/2; W_CHT/2; -SocketDepth(ND_ChemPlu)]
CHTDrainMTA_Origin := CHTDrainCoupling_Origin + [0; 0; -CouplingLength(ND_ChemPlu)]
CHTDrainValve_Origin := CHTDrainMTA_Origin + [0; 0; SocketDepth(ND_ChemPlu) - MaleAdapterLength(ND_ChemPlu)]
CalColPipeLyr := layer_new("ChlorCalCol", blue)
CalColPipe := PipeF(CalColCap_Origin, L_CalColPipe, [0; 270; 0]*deg, ND_ChlorCalCol, PS_Fi)
CalColPipeFrz := FreezeLayer("ChlorCalCol")
CalColPipeScript := stack(CalColPipeLyr, CalColPipe, CalColPipeFrz)
# need to look from back to insert bulkhead
CalColBushingLyr := layer_new("CalColBushing", green)
CalColBushing := CylinderF(CalColBushing_Origin, IR(ND_ChlorCalCol, PS_Fi), SocketDepth(ND_ChlorCalCol), [0; 270; 0]*deg)
CalColBushingFrz := FreezeLayer("CalColBushing")
CalColBushingHole := CylinderF(CalColBushing_Origin, OR(ND_ChemPlu), SocketDepth(ND_ChlorCalCol), [0; 270; 0]*deg)
SubtractCalColBushing := SubtractF(["CalColBushing"], "DeleteMe")
CalColBushingScript := stack(CalColBushingLyr, CalColBushing, CalColBushingFrz, CalColBushingHole, GroupDelete, SubtractCalColBushing)
CHTFittingsLyr := layer_new("CHTFittings", green)
CHTInletBarb := TBarbF(CHTInletBarb_Origin, [0; 0; 0]*deg, ND_FloatValveBarb, ND_FloatValveBarb, PS_Fi)
CHTFloatValveInsert := InsertDwg(FloatValveDwg, CHTFloatValve_Origin, ND_ChemPlu, 0 deg)
CalColThreadedTee := TeeF(CalColTee_Origin, [90; 0; 90]*deg, ND_ChemPlu, PS_Fi)
CalColBarb := TBarbF(ChlorDeliveryBarb_Origin, [0; 90; 0]*deg, ND_ChemPlu, D_LargeChlorineTubes, PS_Fi)
CalColMTALow := MaleAdapterF(CalColMTALow_Origin, [0; 90; 0]*deg, ND_ChemPlu, PS_Fi)
CalColMTAUp := MaleAdapterF(CalColMTAUp_Origin, [0; 270; 0]*deg, ND_ChemPlu, PS_Fi)
CalColCap := CapF(CalColCap_Origin, [0; 270; 0]*deg, ND_ChlorCalCol)
CalColCoupling := CouplingF(CalColCoupling_Origin, [0; 90; 0]*deg, ND_ChlorCalCol, PS_Fi)
CHTOutletFTA := CouplingF(CHTOutletFTA_Origin, [0; 0; 0]*deg, ND_ChemPlu, PS_Fi)
CHTOutletElbow := ElbowF(CHTOutletElbow_Origin, [90; 0; 90]*deg, ND_ChemPlu, PS_Fi)
CHTOutletMTA := MaleAdapterSUBF(CHTOutletMTA_Origin, [0; 0; 0]*deg, ND_ChemPlu, PS_Fi, ["CHT"])
CHTOutletUnion := UnionF(CHTOutletUnion_Origin, [0; 270; 0]*deg, ND_ChemPlu, PS_Fi)
CalColValve := InsertDwg(BallValveDwg, [-CalColValve_Origin[0]; CalColValve_Origin[2]; CalColValve_Origin[1]], ND_ChemPlu, 270 deg)
CHTDrainCoupling := CouplingSUBF(CHTDrainCoupling_Origin, [0; 270; 0]*deg, ND_ChemPlu, PS_Fi, ["CHT"])
CHTDrainMTA := MaleAdapterF(CHTDrainMTA_Origin, [0; 270; 0]*deg, ND_ChemPlu, PS_Fi)
CHTDrainValve := InsertDwg(BallValveDwg, [-CHTDrainValve_Origin[0]; CHTDrainValve_Origin[2]; CHTDrainValve_Origin[1]], ND_ChemPlu, 90 deg)
SubtractDrain := SubtractF(["CHTFittings"], "DeleteMe")
CHTFittingsFrz := FreezeLayer("CHTFittings")
CHTScript := stack(CalColBushingScript, CalColPipeScript, CHTScript, CHTFittingsLyr, CHTInletBarb, CHTOutletMTA, CHTOutletFTA, CHTOutletElbow, CHTOutletUnion, CalColCoupling, CalColThreadedTee, CalColBarb, CalColMTALow, CalColMTAUp, CalColBushing, CalColCap, CHTFloatValveInsert, view("ba"), CalColValve, CHTDrainValve, view("t"), CHTDrainCoupling, CHTDrainMTA, CHTFittingsFrz)
ChemTankLyr := layer_new("ChemicalTank", yellow)
ChlorTank1 := CylinderF(ChlorTank1_Origin, 0.5*D_ChlorineTank + T_ChemTankWall, H_ChlorineTank + T_ChemTankWall, [0; 90]*deg)
ChlorTank2 := CylinderF(ChlorTank2_Origin, 0.5*D_ChlorineTank + T_ChemTankWall, H_ChlorineTank + T_ChemTankWall, [0; 90]*deg)
ChemTankFrz := FreezeLayer("ChemicalTank")
ChlorineTank1Inner := CylinderF(ChlorTank1_Origin + [0; 0; T_ChemTankWall], D_ChlorineTank/2, H_ChlorineTank, [0; 90]*deg)
ChlorineTank2Inner := CylinderF(ChlorTank2_Origin + [0; 0; T_ChemTankWall], D_ChlorineTank/2, H_ChlorineTank, [0; 90]*deg)
HollowTanks := SubtractF(["ChemicalTank"], "DeleteMe")
ChemTanksScript := stack(ChemTankLyr, ChlorTank1, ChlorTank2, ChemTankFrz, ChlorineTank1Inner, ChlorineTank2Inner, GroupDelete, HollowTanks)
# Chlorine Drums
# Draw the chlorine tank and drain plumbing
# all half inch fittings in this layer
LayerChlorPieces := layer_new("ChlorDrumFittingsPlu", green)
ChlorDelivery1BulkheadFitting := InsertDwg(BulkheadDwg, ChlorDelivery1Bulkhead_Origin, ND_ChemPlu, 90 deg)
ChlorDelivery2BulkheadFitting := InsertDwg(BulkheadDwg, ChlorDelivery2Bulkhead_Origin, ND_ChemPlu, 90 deg)
ChlorDelivery1FTA := CouplingF(ChlorDelivery1FTA_Origin, [270; 0; 0]*deg, ND_ChemPlu, PS_Fi)
ChlorDelivery2FTA := CouplingF(ChlorDelivery2FTA_Origin, [270; 0; 0]*deg, ND_ChemPlu, PS_Fi)
ChlorDelivery1PreValveMTA := MaleAdapterF(ChlorDelivery1PreValveMTA_Origin, [270; 0; 0]*deg, ND_ChemPlu, PS_Fi)
ChlorDelivery2PreValveMTA := MaleAdapterF(ChlorDelivery2PreValveMTA_Origin, [270; 0; 0]*deg, ND_ChemPlu, PS_Fi)
ChlorDelivery1Valve := InsertDwg(BallValveDwg, ChlorDelivery1Valve_Origin, ND_ChemPlu, 270 deg)
ChlorDelivery2Valve := InsertDwg(BallValveDwg, ChlorDelivery2Valve_Origin, ND_ChemPlu, 270 deg)
ChlorDelivery1PostValveMTA := MaleAdapterF(ChlorDelivery1PostValveMTA_Origin, [90; 0; 0]*deg, ND_ChemPlu, PS_Fi)
ChlorDelivery2PostValveMTA := MaleAdapterF(ChlorDelivery2PostValveMTA_Origin, [90; 0; 0]*deg, ND_ChemPlu, PS_Fi)
ChlorDelivery1Elbow := ElbowF(ChlorDelivery1Elbow_Origin, [0; 270; 0]*deg, ND_ChemPlu, PS_Fi)
ChlorDelivery2Elbow := ElbowF(ChlorDelivery2Elbow_Origin, [0; 270; 0]*deg, ND_ChemPlu, PS_Fi)
ChlorDelivery1Union := UnionF(ChlorDelivery1Union_Origin, [0; 90; 0]*deg, ND_ChemPlu, PS_Fi)
ChlorDelivery2Union := UnionF(ChlorDelivery2Union_Origin, [0; 90; 0]*deg, ND_ChemPlu, PS_Fi)
ChlorDeliveryTeeToSedTrap := TeeF(ChlorDeliveryTeeToSedTrap_Origin, [0; 0; 90]*deg, ND_ChemPlu, PS_Fi)
ChlorDelivery2Elbow2 := ElbowF(ChlorDelivery2Elbow2_Origin, [90; 0; 270]*deg, ND_ChemPlu, PS_Fi)
ChlorDeliveryAirReleaseTee := TeeF(ChlorDeliveryAirReleaseTee_Origin, [90; 0; 90]*deg, ND_ChemPlu, PS_Fi)
ChlorSedTrapTee := TeeF(ChlorSedTrapTee_Origin, [0; 0; 270]*deg, ND_ChemPlu, PS_Fi)
ChlorFlowSwapMTAUp := MaleAdapterF(ChlorFlowSwapMTAUpper_Origin, [0; 270]*deg, ND_ChemPlu, PS_Fi)
ChlorFlowSwapValve := InsertDwg(BallValveDwg, [-ChlorFlowSwapValve_Origin[0]; ChlorFlowSwapValve_Origin[2]; ChlorFlowSwapValve_Origin[1]], ND_ChemPlu, 90 deg)
ChlorFlowSwapMTALow := MaleAdapterF(ChlorFlowSwapMTALower_Origin, [0; 90]*deg, ND_ChemPlu, PS_Fi)
ChlorElbowToCalCol := ElbowF(ChlorElbowToCalCol_Origin, [180; 0; 90]*deg, ND_ChemPlu, PS_Fi)
ChlorAirReleaseValve := InsertDwg(BallValveDwg, [-ChlorAirReleaseValve_Origin[0]; ChlorAirReleaseValve_Origin[2]; ChlorAirReleaseValve_Origin[1]], ND_ChemPlu, 270 deg)
ChlorSedTrapMTAUp := MaleAdapterF(ChlorSedTrapMTAUp_Origin, [0; 270; 0]*deg, ND_ChemPlu, PS_Fi)
ChlorSedTrapDrainValve := InsertDwg(BallValveDwg, [
    -ChlorSedTrapDrainValve_Origin[0];
    ChlorSedTrapDrainValve_Origin[2];
    ChlorSedTrapDrainValve_Origin[1]
], ND_ChemPlu, 90 deg)
ChlorSedTrapMTALow := MaleAdapterF(ChlorSedTrapMTALow_Origin, [0; 90; 0]*deg, ND_ChemPlu, PS_Fi)
ChlorSedTrapElbowToDrain := ElbowF(ChlorSedTrapElbowtoDrain_Origin, [0; 180; 0]*deg, ND_ChemPlu, PS_Fi)
ChlorSedTrapElbowBelowValve := ElbowF(ChlorSedTrapElbowBelowValve_Origin, [0; 0; 270]*deg, ND_ChemPlu, PS_Fi)
LayerChlorPiecesFrz := FreezeLayer("ChlorDrumFittingsPlu")
ChlorDelivery1 := stack(ChlorDelivery1BulkheadFitting, ChlorDelivery1FTA, ChlorDelivery1PreValveMTA, ChlorDelivery1Valve, ChlorDelivery1PostValveMTA, ChlorDelivery1Elbow, ChlorDelivery1Union)
ChlorDelivery2 := stack(ChlorDelivery2BulkheadFitting, ChlorDelivery2FTA, ChlorDelivery2PreValveMTA, ChlorDelivery2Valve, ChlorDelivery2PostValveMTA, ChlorDelivery2Elbow, ChlorDelivery2Union, ChlorDelivery2Elbow2)
ChlorDeliveryFittings := stack(LayerChlorPieces, ChlorDelivery1, ChlorDelivery2, ChlorDeliveryTeeToSedTrap, ChlorDeliveryAirReleaseTee, ChlorSedTrapTee, ChlorFlowSwapMTAUp, view("ba"), ChlorSedTrapDrainValve, ChlorAirReleaseValve, ChlorFlowSwapValve, view("t"), ChlorFlowSwapMTALow, ChlorElbowToCalCol, ChlorSedTrapMTAUp, ChlorSedTrapMTALow, ChlorSedTrapElbowToDrain, ChlorSedTrapElbowBelowValve, LayerChlorPiecesFrz)
ChlorDrainReducerLyr := layer_new("ChlorineDrainReducer", green)
ChlorDrainReducerDraw := reducerF(ChlorEtDrainReducer_Origin, [0; 90; 0]*deg, ND_EtDrain, ND_ChemDrain, ReducerLengthDrain, PS_Fi)
ChlorDrainReducerFrz := FreezeLayer("ChlorineDrainReducer")
ChlorDrainReducer := stack(ChlorDrainReducerLyr, ChlorDrainReducerDraw, ChlorDrainReducerFrz)
# reducer and 1.5" fittings in this layer
ChlorDrainFittingsLayer := layer_new("ChlorDrumDrainFittings", green)
ChlorDrain1Bulkhead := InsertDwg(BulkheadDwg, [ChlorDrain1Bulkhead_Origin[0]; ChlorDrain1Bulkhead_Origin[2]; (-ChlorDrain1Bulkhead_Origin)[1]], ND_ChemDrain, 270 deg)
# switch this to front view
ChlorDrain2Bulkhead := InsertDwg(BulkheadDwg, [ChlorDrain2Bulkhead_Origin[0]; ChlorDrain2Bulkhead_Origin[2]; (-ChlorDrain2Bulkhead_Origin)[1]], ND_ChemDrain, 270 deg)
ChlorDrain1FTA := CouplingF(ChlorDrain1FTA_Origin, [0; 270]*deg, ND_ChemDrain, PS_Fi)
ChlorDrain2FTA := CouplingF(ChlorDrain2FTA_Origin, [0; 270]*deg, ND_ChemDrain, PS_Fi)
ChlorDrain1MTAUp := MaleAdapterF(ChlorDrain1MTAUp_Origin, [0; 270]*deg, ND_ChemDrain, PS_Fi)
ChlorDrain2MTAUp := MaleAdapterF(ChlorDrain2MTAUp_Origin, [0; 270]*deg, ND_ChemDrain, PS_Fi)
ChlorDrain1Valve := InsertDwg(BallValveDwg, [-ChlorDrain1Valve_Origin[0]; ChlorDrain1Valve_Origin[2]; ChlorDrain1Valve_Origin[1]], ND_ChemPlu, 90 deg)
ChlorDrain2Valve := InsertDwg(BallValveDwg, [-ChlorDrain2Valve_Origin[0]; ChlorDrain2Valve_Origin[2]; ChlorDrain2Valve_Origin[1]], ND_ChemPlu, 90 deg)
ChlorDrain1MTALow := MaleAdapterF(ChlorDrain1MTALow_Origin, [0; 90]*deg, ND_ChemDrain, PS_Fi)
ChlorDrain2MTALow := MaleAdapterF(ChlorDrain2MTALow_Origin, [0; 90]*deg, ND_ChemDrain, PS_Fi)
ChlorDrain1Union := UnionF(ChlorDrain1Union_Origin, [0; 90]*deg, ND_ChemDrain, PS_Fi)
ChlorDrain2Union := UnionF(ChlorDrain2Union_Origin, [0; 90]*deg, ND_ChemDrain, PS_Fi)
ChlorDrain2Elbow := ElbowF(ChlorDrain2Elbow_Origin, [0; 90; 0]*deg, ND_ChemDrain, PS_Fi)
ChlorDrain1Tee := TeeF(ChlorDrain1Tee_Origin, [90; 90; 0]*deg, ND_ChemDrain, PS_Fi)
ChlorDrain2Elbow2 := ElbowF(ChlorDrain2Elbow2_Origin, [180; 0; 0]*deg, ND_ChemDrain, PS_Fi)
ChlorDrainTee1to2 := TeeF(ChlorDrainTee1to2_Origin, [90; 0; 0]*deg, ND_ChemDrain, PS_Fi)
ChlorDrainElbowToEtDrain := ElbowF(ChlorDrainElbowToEtDrain_Origin, [180; 90; 0]*deg, ND_ChemDrain, PS_Fi)
ChlorEtDrainElbow := ElbowSUBF(ChlorEtDrainElbow_Origin, [180; 90; 0]*deg, ND_EtDrain, PS_Fi, ["Room"])
ChlorEtDrainTee := TeeSUBF(ChlorEtDrainTee_Origin, [90; 90; 0]*deg, ND_EtDrain, PS_Fi, ["Room"])
ChlorRoomDrainTee := TeeSUBF(ChlorRoomDrainTee_Origin, [0; 90; 0]*deg, ND_EtDrain, PS_Fi, ["Room"])
ChlorDrainFittingsFrz := FreezeLayer("ChlorDrumDrainFittings")
ChlorDrain1 := stack(view("f"), ChlorDrain1Bulkhead, view("ba"), ChlorDrain1Valve, view("t"), ChlorDrain1FTA, ChlorDrain1MTAUp, ChlorDrain1MTALow, ChlorDrain1Union, ChlorDrain1Tee)
ChlorDrain2 := stack(view("f"), ChlorDrain2Bulkhead, view("ba"), ChlorDrain2Valve, view("t"), ChlorDrain2FTA, ChlorDrain2MTAUp, ChlorDrain2MTALow, ChlorDrain2Union, ChlorDrain2Elbow, ChlorDrain2Elbow2)
ChlorDrainFittings := stack(ChlorDrainReducer, ChlorDrainFittingsLayer, ChlorDrain1, ChlorDrain2, ChlorDrainTee1to2, ChlorDrainElbowToEtDrain, ChlorEtDrainElbow, ChlorEtDrainTee, ChlorRoomDrainTee, ChlorDrainFittingsFrz)
LayerChlorPiping := layer_new("ChlorPipingPlu", blue)  # includes all piping (both 0.5" and 1.5")
ChlorAirReleasePipe := PipeF(ChlorAirReleasePipe_Origin, L_ChlorAirRelease, [0; 90]*deg, ND_ChemPlu, PS_Fi)
ChlorDeliveryTeeToSedTrapPipe := PipeF(ChlorSedTrapTee_Origin + [-ShortTeeLength(ND_ChemPlu); 0; ShortTeeLength(ND_ChemPlu)], L_DeliveryTeeToSedTrap, [0; 0]*deg, ND_ChemPlu, PS_Fi)
ChlorAirReleaseToMTA := PipeF(ChlorFlowSwapMTAUpper_Origin, L_ChlorAirReleaseToMTA, [0; 90]*deg, ND_ChemPlu, PS_Fi)
L_ChlorDelivery1to2 := ChlorDeliveryTeeToSedTrap_Origin[0] - ChlorDelivery2Elbow2_Origin[0] - ShortTeeLength(ND_ChemPlu)
L_ChlorDrain2X := ChlorDrain2Elbow_Origin[1] - ChlorDrain2Elbow2_Origin[1]
ChlorDelivery1To2Pipe := PipeF(ChlorDeliveryTeeToSedTrap_Origin + [-ShortTeeLength(ND_ChemPlu); 0; -ShortTeeLength(ND_ChemPlu)], L_ChlorDelivery1to2, [0; 0]*deg, ND_ChemPlu, PS_Fi)
ChlorSedTrapPipe := PipeF(ChlorSedTrapTee_Origin, L_SedTrapPipe, [0; 270]*deg, ND_ChemPlu, PS_Fi)
ChlorSedTrapXPipe := PipeF(ChlorSedTrapElbowBelowValve_Origin + [-ElbowRadius(ND_ChemPlu); 0; -ElbowRadius(ND_ChemPlu)], L_SedTrapToDrainX, [0; 0]*deg, ND_ChemPlu, PS_Fi)
ChlorSedTrapToDrainYPipe := PipeF(ChlorDrain1Tee_Origin + [0; ShortTeeLength(ND_ChemDrain); -ShortTeeLength(ND_ChemDrain)], L_SedTrapToDrainY, [270; 0]*deg, ND_ChemPlu, PS_Fi)
ChlorDrain2PipeX := PipeF(ChlorDrain2Elbow2_Origin, L_ChlorDrain2X, [270; 0; 0]*deg, ND_ChemDrain, PS_Fi)
ChlorDrain1To2X := PipeF(ChlorDrainTee1to2_Origin, L_ChlorDrain1To2X, [0; 0; 0]*deg, ND_ChemDrain, PS_Fi)
ChlorDrain1To2Y := PipeF(ChlorDrain1Tee_Origin + [0; -ShortTeeLength(ND_ChemDrain); -ShortTeeLength(ND_ChemDrain)], L_ChlorDrain1To2Y, [90; 0; 0]*deg, ND_ChemDrain, PS_Fi)
ChlorDrainToEtY := PipeF(ChlorDrainElbowToEtDrain_Origin, L_ChlorDrainToEtY, [270; 0; 0]*deg, ND_ChemDrain, PS_Fi)
ChlorDrainToEtDrainPipeZ := PipeF(ChlorEtDrainReducer_Origin + [0; 0; ReducerLengthDrain], L_ChlorDrainToEtDrainZ, [0; 90; 0]*deg, ND_ChemDrain, PS_Fi)
ChlorEtDrainElbowToRoomDrain := PipeF(ChlorEtDrainElbow_Origin + [0; -ElbowRadius(ND_EtDrain); -ElbowRadius(ND_EtDrain)], L_ChlorLargeDrainVertLow, [0; 270]*deg, ND_EtDrain, PS_Fi)
ChlorRoomDrain := PipeSUBF(ChlorRoomDrainTee_Origin, L_RoomDrainPipe, [270; 90]*deg, ND_EtDrain, PS_Fi, ["Room"])
ChlorDrainToGround := PipeF(ChlorDrainToGround_Origin, L_ChlorLargeDrainLast, [0; 270]*deg, ND_EtDrain, PS_Fi)
L_EtDrainThroughWall := ChlorEtDrainTee_Origin[1] - ChlorEtDrainElbow_Origin[1] - ShortTeeLength(ND_EtDrain) = 0.223013 m
EtDrainThroughWall := PipeSUBF(ChlorEtDrainElbow_Origin, L_EtDrainThroughWall, [270; 0]*deg, ND_EtDrain, PS_Fi, ["Room"])
L_EtDrainPipeY := EtDrainElbow_Origin[1] - ChlorEtDrainTee_Origin[1] - ShortTeeLength(ND_EtDrain) - ElbowRadius(ND_EtDrain) = 0.279772 m
EtDrainYPipe := PipeF(EtDrainElbow_Origin + [0; -ElbowRadius(ND_EtDrain); -ElbowRadius(ND_EtDrain)], L_EtDrainPipeY, [90; 0]*deg, ND_EtDrain, PS_Fi)
LayerChlorPipingFrz := FreezeLayer("ChlorPipingPlu")
ChlorDeliveryPlu := stack(LayerChlorPiping, ChlorAirReleasePipe, ChlorDelivery1To2Pipe, ChlorDeliveryTeeToSedTrapPipe, ChlorAirReleaseToMTA, ChlorSedTrapPipe, ChlorSedTrapXPipe, ChlorSedTrapToDrainYPipe, ChlorDrain2PipeX, ChlorDrain1To2X, ChlorDrain1To2Y, ChlorDrainToEtY, ChlorDrainToEtDrainPipeZ, ChlorEtDrainElbowToRoomDrain, ChlorRoomDrain, ChlorDrainToGround, EtDrainThroughWall, EtDrainYPipe, LayerChlorPipingFrz)
RoomDrainWedge := WedgeF(RoomDrainWedge_Origin, RoomDrainWedge_Origin + RoomDrainWedge_Dim, [90; 180; 0]*deg)
SubtractWedge := SubtractF(["Room"], "DeleteMe")
ChlorPlu := stack(ChlorDeliveryFittings, ChlorDrainFittings, ChlorDeliveryPlu, RoomDrainWedge, GroupDelete, SubtractWedge)
# Design Tube Plumbing
CdcInletMTAup_Origin := CHTOutletUnion_Origin + [0; 0; -UnionLength(ND_ChemPlu)]
CdcInletValve_Origin := CdcInletMTAup_Origin + [0; 0; -MaleAdapterLength(ND_ChemPlu) + SocketDepth(ND_ChemPlu)]
CdcInletMTAlow_Origin := CdcInletValve_Origin + [
    0;
    0;
    -BallValveLength(ND_ChemPlu) + 2*BallValveSocket(ND_ChemPlu) - MaleAdapterLength(ND_ChemPlu) + SocketDepth(ND_ChemPlu)
] = [-0.56802; 0.709562; 10.6514] m
L_ChlorineTube = 0.5 m
L_BarbUncovered := 0.25*TBarbBLength(D_ChlorineTube) + (TBarbLength(ND_ChemPlu, D_ChlorineTube) - TBarbBLength(D_ChlorineTube) - TBarbTLength(ND_ChemPlu)) = 0.572263 cm
L_ChlorineTubeFinal := L_ChlorineTube - 2*L_BarbUncovered = 0.488555 m
L_CdcPlumbingTeeToWyeVert := ShortTeeLength(ND_ChemPlu) + 2*SocketDepth(ND_ChemPlu) + sin(45 deg)*(ElbowRadius(ND_ChemPlu) + DiagWyeLength(ND_ChemPlu) + 2*SocketDepth(ND_ChemPlu) + 2*CouplingLength(ND_ChemPlu) + 2*L_BarbUncovered + L_ChlorineTubeFinal)
L_CdcPlumbingVertPipe := L_CdcPlumbingTeeToWyeVert - 4*MaleAdapterLength(ND_ChemPlu) - 2*BallValveLength(ND_ChemPlu) + 4*BallValveSocket(ND_ChemPlu) - LongWyeLength(ND_ChemPlu) + OR(ND_ChemPlu)/sqrt(2) + SocketDepth(ND_ChemPlu)
CdcWyeTrapMTAup_Origin := CdcInletMTAlow_Origin + [0; 0; -L_CdcPlumbingVertPipe] = [-0.56802; 0.709562; 10.344] m
CdcWyeTrapValve_Origin := CdcWyeTrapMTAup_Origin + [
    0;
    0;
    SocketDepth(ND_ChemPlu) - MaleAdapterLength(ND_ChemPlu) + 2*BallValveSocket(ND_ChemPlu) - BallValveLength(ND_ChemPlu)
]
CdcWyeTrapMTAlow_Origin := CdcWyeTrapValve_Origin + [0; 0; -MaleAdapterLength(ND_ChemPlu) + SocketDepth(ND_ChemPlu)]
CdcWye_Origin := [
    CdcWyeTrapMTAlow_Origin[0] - DiagWyeLength(ND_ChemPlu)*sin(45 deg);
    CdcWyeTrapMTAlow_Origin[1];
    CdcWyeTrapMTAlow_Origin[2] - 2*SocketDepth(ND_ChemPlu) - LongWyeLength(ND_ChemPlu) + OR(ND_ChemPlu)/sqrt(2) + sin(45 deg)*DiagWyeLength(ND_ChemPlu)
] = [-0.589348; 0.709562; 10.2339] m
CdcFTAlow_Origin := CdcWye_Origin + [-2*SocketDepth(ND_ChemPlu)*sin(45 deg); 0; 2*SocketDepth(ND_ChemPlu)*sin(45 deg)]
CdcDrainMTA_Origin := [0; 0; -4*SocketDepth(ND_ChemPlu) - LongWyeLength(ND_ChemPlu)] + CdcWyeTrapMTAlow_Origin
CdcDrainValve_Origin := CdcDrainMTA_Origin + [0; 0; SocketDepth(ND_ChemPlu) - MaleAdapterLength(ND_ChemPlu)]
CdcDesignBarbLow_Origin := CdcFTAlow_Origin + [
    -(CouplingLength(ND_ChemPlu) - SocketDepth(ND_ChemPlu))*sin(45 deg);
    0;
    (CouplingLength(ND_ChemPlu) - SocketDepth(ND_ChemPlu))*sin(45 deg)
] = [-0.634485; 0.709562; 10.279] m
CdcDesignTube_Origin := CdcDesignBarbLow_Origin + [-L_BarbUncovered*sin(45 deg); 0; L_BarbUncovered*sin(45 deg)] = [-0.638531; 0.709562; 10.2831] m
CdcDesignBarbUp_Origin := CdcDesignTube_Origin + [
    -sin(45 deg)*(L_BarbUncovered + L_ChlorineTubeFinal);
    0;
    sin(45 deg)*(L_BarbUncovered + L_ChlorineTubeFinal)
] = [-0.988038; 0.709562; 10.6326] m
ElbowRadius(ND_ChemPlu)*sin(45 deg) = 0.0104298 m
-ElbowRadius(ND_ChemPlu) = -0.01475 m
CdcFTAup_Origin := CdcDesignBarbUp_Origin + [-(SocketDepth(ND_ChemPlu)*sin(45 deg)); 0; SocketDepth(ND_ChemPlu)*sin(45 deg)] = [-1.00006; 0.709562; 10.6446] m
-ElbowRadius(ND_ChemPlu) + ElbowRadius(ND_ChemPlu)*sin(45 deg) = -0.00432017 m
CdcEl45_Origin := CdcFTAup_Origin + [
    -CouplingLength(ND_ChemPlu)*sin(45 deg) - ElbowRadius(ND_ChemPlu)*sin(45 deg);
    0;
    CouplingLength(ND_ChemPlu)*sin(45 deg) - ElbowRadius(ND_ChemPlu)*sin(45 deg) + ElbowRadius(ND_ChemPlu)
] = [-1.0436; 0.709562; 10.682] m
CdcOutletTee_Origin := [
    ShortTeeLength(ND_ChemPlu) + Origin_UpperPlatform[0] - L_ChemPlatform + W_SquarePipe/2;
    CdcEl45_Origin[1];
    CdcEl45_Origin[2]
]
CdcOutletBarb_Origin := CdcOutletTee_Origin + [-ShortTeeLength(ND_ChemPlu); 0; -ShortTeeLength(ND_ChemPlu) - SocketDepth(ND_ChemPlu)]
CdcOutletAirReleaseMTA_Origin := [
    CdcOutletTee_Origin[0] - ShortTeeLength(ND_ChemPlu);
    CdcOutletTee_Origin[1];
    CHTInletBarb_Origin[2]
] = [-1.13938; 0.709562; 10.8444] m
CdcOutletAirReleaseValve_Origin := CdcOutletAirReleaseMTA_Origin + [0; 0; MaleAdapterLength(ND_ChemPlu) - SocketDepth(ND_ChemPlu)]
ChlorManifoldLayer := layer_new("ChlorControlFittings", green)
CdcInletMTAup := MaleAdapterF(CdcInletMTAup_Origin, [0; 270; 0]*deg, ND_ChemPlu, PS_Fi)
CdcInletMTAlow := MaleAdapterF(CdcInletMTAlow_Origin, [0; 90; 0]*deg, ND_ChemPlu, PS_Fi)
CdcWye := WyeF(CdcWye_Origin, [90; 0; 270]*deg, ND_ChemPlu, PS_Fi)
CdcFTAlow := CouplingF(CdcFTAlow_Origin, [0; 45; 0]*deg, ND_ChemPlu, PS_Fi)
CdcWyeTrapMTAlow := MaleAdapterF(CdcWyeTrapMTAlow_Origin, [0; 90; 0]*deg, ND_ChemPlu, PS_Fi)
CdcWyeTrapMTAup := MaleAdapterF(CdcWyeTrapMTAup_Origin, [0; 270; 0]*deg, ND_ChemPlu, PS_Fi)
CdcDrainMTA := MaleAdapterF(CdcDrainMTA_Origin, [0; 270; 0]*deg, ND_ChemPlu, PS_Fi)
CdcDesignBarbLow := TBarbF(CdcDesignBarbLow_Origin, [0; 225; 0]*deg, ND_ChemPlu, D_ChlorineTube, PS_Fi)
CdcDesignBarbUp := TBarbF(CdcDesignBarbUp_Origin, [0; 45; 0]*deg, ND_ChemPlu, D_ChlorineTube, PS_Fi)
CdcFTAup := CouplingF(CdcFTAup_Origin, [0; 45; 0]*deg, ND_ChemPlu, PS_Fi)
CdcEl45 := Elbow45F(CdcEl45_Origin, [270; 0; 270]*deg, ND_ChemPlu, PS_Fi)
CdcOutletTee := TeeF(CdcOutletTee_Origin, [270; 0; 90]*deg, ND_ChemPlu, PS_Fi)
CdcOutletAirReleaseMTA := MaleAdapterF(CdcOutletAirReleaseMTA_Origin, [0; 90; 0]*deg, ND_ChemPlu, PS_Fi)
CdcOutletBarb := TBarbF(CdcOutletBarb_Origin, [0; 90; 0]*deg, ND_ChemPlu, D_LargeChlorineTubes, PS_Fi)
ChlorControlFittings := stack(ChlorManifoldLayer, CdcInletMTAup, CdcInletMTAlow, CdcWye, CdcFTAlow, CdcWyeTrapMTAlow, CdcWyeTrapMTAup, CdcDrainMTA, CdcDesignBarbLow, CdcDesignBarbUp, CdcFTAup, CdcEl45, CdcOutletTee, CdcOutletAirReleaseMTA, CdcOutletBarb)
# draw all ball valves looking from the back
CdcInletValve := InsertDwg(BallValveDwg, [(-CdcInletValve_Origin)[0]; CdcInletValve_Origin[2]; CdcInletValve_Origin[1]], ND_ChemPlu, 90 deg)
CdcWyeTrapValve := InsertDwg(BallValveDwg, [(-CdcWyeTrapValve_Origin)[0]; CdcWyeTrapValve_Origin[2]; CdcWyeTrapValve_Origin[1]], ND_ChemPlu, 270 deg)
CdcDrainValve := InsertDwg(BallValveDwg, [(-CdcDrainValve_Origin)[0]; CdcDrainValve_Origin[2]; CdcDrainValve_Origin[1]], ND_ChemPlu, 90 deg)
CdcOutletAirReleaseValve := InsertDwg(BallValveDwg, [
    (-CdcOutletAirReleaseValve_Origin)[0];
    CdcOutletAirReleaseValve_Origin[2];
    CdcOutletAirReleaseValve_Origin[1]
], ND_ChemPlu, 270 deg)
ChlorControlValves := stack(view("ba"), CdcInletValve, CdcWyeTrapValve, CdcDrainValve, CdcOutletAirReleaseValve, view("t"))
ChlorManifoldFreeze := FreezeLayer("ChlorControlFittings")
ChlorControlFittingsTotal := stack(ChlorControlFittings, ChlorControlValves, ChlorManifoldFreeze)
ChlorControlPipesLayer := layer_new("ChlorControlPipes", blue)
L_CdcPlumbingHorizPipe := CdcEl45_Origin[0] - CdcOutletTee_Origin[0]
ControlPipeVert := PipeF(CdcWyeTrapMTAup_Origin, L_CdcPlumbingVertPipe, [0; 90; 0]*deg, ND_ChemPlu, PS_Fi)
ControlPipeHoriz := PipeF(CdcEl45_Origin, L_CdcPlumbingHorizPipe, [0; 0; 0]*deg, ND_ChemPlu, PS_Fi)
L_AirReleasePipe := CdcOutletAirReleaseMTA_Origin[2] - CdcOutletTee_Origin[2] - ShortTeeLength(ND_ChemPlu)
OutletAirReleasePipe := PipeF(CdcOutletAirReleaseMTA_Origin, L_AirReleasePipe, [0; 270; 0]*deg, ND_ChemPlu, PS_Fi)
ChlorManPipesFreeze := FreezeLayer("ChlorControlPipes")
OD_ChlorineTube := 1/4*in
ChlorDesignTubeLayer := layer_new("ChlorDesignTube", blue3)
ChlorDesignTube := CylinderF(CdcDesignTube_Origin, OD_ChlorineTube/2, L_ChlorineTubeFinal, [0; 45; 0]*deg)
ChlorDesignTubeFreeze := FreezeLayer("ChlorDesignTube")
ChlorDesignTubeInner := CylinderF(CdcDesignTube_Origin, D_ChlorineTube/2, L_ChlorineTubeFinal, [0; 45; 0]*deg)
SubtractTube := SubtractF(["ChlorDesignTube"], "DeleteMe")
ChlorineManTubeScript := stack(ChlorDesignTubeLayer, ChlorDesignTube, ChlorDesignTubeFreeze, ChlorDesignTubeInner, GroupDelete, SubtractTube)
ChlorManifoldPipes := stack(ChlorControlPipesLayer, ControlPipeVert, ControlPipeHoriz, OutletAirReleasePipe, ChlorManPipesFreeze)
ThawDesignPlumbing := ThawMultiple(["ChlorControlFittings"; "ChlorDesignTube"; "ChlorControlPipes"])
Y_DesignTubeOffset := CdcInletMTAup_Origin[1] - Origin_LowerPlatform[1] - W_ChemPlatform - OR_Fitting(ND_ChemPlu) = 0.0444246 m
X_DesignTubeOffset := CdcInletMTAup_Origin[0] - (Origin_LowerPlatform[0] - L_ChemPlatform + W_SquarePipe/2) = 0.571361 m
AN_DesignTubePlumbing := atan(Y_DesignTubeOffset/X_DesignTubeOffset) = 0.0775961
Rotate3DAll := Rotate_All(CdcInletMTAup_Origin, AN_DesignTubePlumbing)
ChlorManifoldPlu := stack(ChlorControlFittingsTotal, ChlorManifoldPipes, ChlorineManTubeScript, ThawDesignPlumbing, Rotate3DAll, ChlorManifoldFreeze, ChlorDesignTubeFreeze, ChlorManPipesFreeze)
# Mounted Lever and Drop Tube
# Lever Arm Slider
L_LeverArmSliderWindow := 1 in
H_LeverArmSliderWindow := 3/4*in
L_LeverArmSlider := 3 in
W_LeverArmSlider := 7/8*in
H_LeverArmSlider := 1.5 in
Slider_Origin := [
    FlowMeteringTank_Origin[0] - L_EtMin - T_Et - L_CdcLeverArm/2*0.75;
    FlowMeteringTank_Origin[1] + (L_EtFloat + 0.5*S_Fitting + T_CdcLeverArm)/2 + W_LeverArmSlider - 3/8*in;
    Z_LeverArmFulcrum + H_LeverArmSlider/2
] = [-0.977371; 0.254575; 10.8634] m  # looking from the top, this is the left (-x direction), top (+y), upper (+z) point
LeverSliderLyr := layer_new("LeverArmSlider", ltgrey)
LeverSliderBox := BoxF(Slider_Origin, [L_LeverArmSlider; -W_LeverArmSlider; -H_LeverArmSlider] + Slider_Origin, [0; 0; 0]*deg)
LeverSliderFrz := FreezeLayer("LeverArmSlider")
LeverArmUBox := BoxF([
    FlowMeteringTank_Origin[0] - L_EtMin - T_Et - L_CdcLeverArm/2*0.75;
    FlowMeteringTank_Origin[1] + 0.5*(L_EtFloat + 0.5*S_Fitting) + 1.5*T_CdcLeverArm;
    Z_LeverArmFulcrum + 0.5*H_LeverArmSliderWindow
], [
    FlowMeteringTank_Origin[0] - L_EtMin - T_Et - L_CdcLeverArm/2*0.75 + L_LeverArmSlider;
    FlowMeteringTank_Origin[1] + 0.5*(L_EtFloat + 0.5*S_Fitting) - W_LeverArmSlider/2 - zc;
    Z_LeverArmFulcrum - 0.5*H_LeverArmSliderWindow
], [0; 0; 0]*deg)
SliderWindowBox := BoxF(Slider_Origin + [L_LeverArmSlider/2 - L_LeverArmSliderWindow/2; 0; -H_LeverArmSlider/2 - H_LeverArmSliderWindow/2], [
    L_LeverArmSlider/2 + L_LeverArmSliderWindow/2;
    -W_LeverArmSlider;
    -H_LeverArmSlider/2 + H_LeverArmSliderWindow/2
] + Slider_Origin, [0; 0; 0]*deg)
SubtractSliderParts := SubtractF(["LeverArmSlider"], "DeleteMe")
SliderScrewLyr := layer_new("sliderscrew", yellow)
H_SliderScrewThread := 1.5 cm
SliderScrewThread := CylinderSUBF([1 cm + Slider_Origin[0]; -W_LeverArmSlider/2 + Slider_Origin[1]; Z_LeverArmFulcrum + H_LeverArm/2], 2 mm, H_SliderScrewThread, [0; 90; 0]*deg, ["LeverArmSlider"])
SliderScrewTop := CylinderSUBF([
    1 cm + Slider_Origin[0];
    -W_LeverArmSlider/2 + Slider_Origin[1];
    Z_LeverArmFulcrum + H_LeverArm/2 + H_SliderScrewThread
], 0.75 cm, 0.5 cm, [0; 90; 0]*deg, ["LeverArmSlider"])
SliderScrewFrz := FreezeLayer("sliderscrew")
SliderScrewScript := stack(SliderScrewLyr, SliderScrewThread, SliderScrewTop, Union_All, SliderScrewFrz)
LeverSliderScript := stack(LeverSliderLyr, LeverSliderBox, LeverSliderFrz, LeverArmUBox, SliderWindowBox, GroupDelete, SubtractSliderParts, SliderScrewScript)
# Lever Arm
# mounting block
CdcMountingBlockLyr := layer_new("MountingBlock", ltgrey)
MountingPlate := BoxF(FlowMeteringTank_Origin + [
    -L_EtMin - T_Et;
    L_EtFloat/2 + S_Fitting/4 - W_MountingPlate - T_CdcLeverArm/2;
    H_Et - H_MountingOverlap
], FlowMeteringTank_Origin + [
    -L_EtMin - T_Et - T_MountingPlate;
    L_EtFloat/2 + S_Fitting/4 - T_CdcLeverArm/2;
    H_Et - H_MountingOverlap + H_MountingPlate
], [0; 0; 0]*deg)
MountingBlockFrz := FreezeLayer("MountingBlock")
UpperSliderBox := BoxF([
    -L_EtMin - T_Et + FlowMeteringTank_Origin[0];
    L_EtFloat/2 + S_Fitting/4 - T_CdcLeverArm*2 + FlowMeteringTank_Origin[1];
    Z_LeverArmFulcrum + 0.7*H_LeverArm/2
], [
    -L_EtMin - T_Et - T_MountingPlate + FlowMeteringTank_Origin[0];
    L_EtFloat/2 + S_Fitting/4 + FlowMeteringTank_Origin[2];
    Z_LeverArmFulcrum + H_LeverArmSlider/2
], [0; 0; 0]*deg)
LowerSliderBox := BoxF([
    -L_EtMin - T_Et + FlowMeteringTank_Origin[0];
    L_EtFloat/2 + S_Fitting/4 - T_CdcLeverArm*2 + FlowMeteringTank_Origin[1];
    Z_LeverArmFulcrum - 0.7*H_LeverArm/2
], [
    -L_EtMin - T_Et - T_MountingPlate + FlowMeteringTank_Origin[0];
    L_EtFloat/2 + S_Fitting/4 + FlowMeteringTank_Origin[2];
    Z_LeverArmFulcrum - H_LeverArmSlider/2
], [0; 0; 0]*deg)
CutMountingPlate := SubtractF(["MountingBlock"], "DeleteMe")
CdcLeverMounting := stack(CdcMountingBlockLyr, MountingPlate, MountingBlockFrz, UpperSliderBox, LowerSliderBox, GroupDelete, CutMountingPlate)
CdcLeverLayer := layer_new("CDCLeverArm", grey)
CdcLeverArm := BoxSUBF([
    FlowMeteringTank_Origin[0] - L_EtMin - T_Et - L_CdcLeverArm/2 - T_MountingPlate/2;
    FlowMeteringTank_Origin[1] + (L_EtFloat + 0.5*S_Fitting + T_CdcLeverArm)*0.5;
    Z_LeverArmFulcrum + H_LeverArm/2
], [
    FlowMeteringTank_Origin[0] - L_EtMin - T_Et + L_CdcLeverArm/2 - T_MountingPlate/2;
    FlowMeteringTank_Origin[1] + 0.5*(L_EtFloat + 0.5*S_Fitting - T_CdcLeverArm);
    Z_LeverArmFulcrum - H_LeverArm/2
], [0; 0; 0]*deg, ["LeverArmSlider"])
CdcLeverArmFulcrum := CylinderSUBF([
    -L_EtMin - T_Et - T_MountingPlate/2 + FlowMeteringTank_Origin[0];
    0.5*(L_EtFloat + 0.5*S_Fitting + T_CdcLeverArm) + 2 mm + FlowMeteringTank_Origin[1];
    Z_LeverArmFulcrum
], 0.5 cm, W_MountingPlate + T_CdcLeverArm + 4 mm, [90; 0; 0]*deg, ["MountingBlock"])
CdcLeverFrz := FreezeLayer("CDCLeverArm")
D_Hole := 1/2*in
LeverArmHoleL := CylinderF([
    FlowMeteringTank_Origin[0] - L_EtMin - T_Et - L_CdcLeverArm/2 + L_HoleOffset - T_MountingPlate/2;
    FlowMeteringTank_Origin[1] + 0.5*(L_EtFloat + 0.5*S_Fitting) - T_CdcLeverArm;
    Z_LeverArmFulcrum
], D_Hole/2, 3*T_CdcLeverArm, [270; 0; 0]*deg)
LeverArmHoleR := CylinderF([
    FlowMeteringTank_Origin[0] - L_EtMin - T_Et + L_CdcLeverArm/2 - L_HoleOffset - T_MountingPlate/2;
    FlowMeteringTank_Origin[1] + 0.5*(L_EtFloat + 0.5*S_Fitting) - T_CdcLeverArm;
    Z_LeverArmFulcrum
], D_Hole/2, 3*T_CdcLeverArm, [270; 0; 0]*deg)
SubtractLeverArmHoles := SubtractF(["CdcLeverArm"], "DeleteMe")
CdcLeverArm_Script := stack(LeverSliderScript, CdcLeverMounting, CdcLeverLayer, CdcLeverArm, CdcLeverArmFulcrum, CdcLeverFrz, LeverArmHoleL, LeverArmHoleR, GroupDelete, SubtractLeverArmHoles)
# Drop Tube
DropTubeTee_Origin := [
    Slider_Origin[0] + (L_LeverArmSlider + L_LeverArmSliderWindow)/2 + 0.5*(L_LeverArmSlider - (L_LeverArmSlider + L_LeverArmSliderWindow)/2);
    Slider_Origin[1] + OR_Fitting(ND_ChemPlu) + ShortTeeLength(ND_ChemPlu) + SocketDepth(ND_ChemPlu);
    Z_LeverArmFulcrum + IR(D_LargeChlorineTubes, PS_Fi)
]
BarbedElbowTorus_Origin := DropTubeTee_Origin + [ElbowRadius(ND_ChemPlu); SocketDepth(ND_ChemPlu); 0]
DropTubeBarbEdge_Origin := BarbedElbowTorus_Origin + [SocketDepth(ND_ChemPlu); ElbowRadius(ND_ChemPlu); 0] = [-0.882121; 0.331966; 10.8506] m
DropTubeBarbWide_Origin := DropTubeBarbEdge_Origin + [-SocketDepth(ND_ChemPlu); 0; 0] = [-0.899121; 0.331966; 10.8506] m
DropTubeBarbLower_Origin := DropTubeTee_Origin + [0; -ShortTeeLength(ND_ChemPlu); -ShortTeeLength(ND_ChemPlu) - SocketDepth(ND_ChemPlu)]
D_OuterTorusElbowBarb := D_LargeChlorineTubes + 1 mm
DropTubeBarbedElbowLyr := layer_new("DropTubeBarbedElbow", green)
BarbEdgeCircle := circle([DropTubeBarbEdge_Origin[1]; DropTubeBarbEdge_Origin[2]; DropTubeBarbEdge_Origin[0]], D_OuterTorusElbowBarb/2) = "c 0.33197,10.85062,-0.88212 0.00526"
BarbWideCircle := circle([DropTubeBarbWide_Origin[1]; DropTubeBarbWide_Origin[2]; DropTubeBarbWide_Origin[0]], 1.2*(D_OuterTorusElbowBarb/2)) = "c 0.33197,10.85062,-0.89912 0.00632"
LoftElbowBarb := Loft([DropTubeBarbEdge_Origin[0]; DropTubeBarbEdge_Origin[1]], [DropTubeBarbWide_Origin[0]; DropTubeBarbWide_Origin[1]])
OuterBarbTorus := Torus(BarbedElbowTorus_Origin, ElbowRadius(ND_ChemPlu), D_OuterTorusElbowBarb/2)
DropTubeBarbedElbowFrz := FreezeLayer("DropTubeBarbedElbow")
BarbHorizCut := BoxF(BarbedElbowTorus_Origin + [
    -ElbowRadius(ND_ChemPlu) - OR(D_LargeChlorineTubes) - zc;
    -ElbowRadius(ND_ChemPlu) - OR(D_LargeChlorineTubes) - zc;
    OR(D_LargeChlorineTubes) + zc
], BarbedElbowTorus_Origin + [(ElbowRadius(ND_ChemPlu) + OR(D_LargeChlorineTubes)) + zc; 0; -(OR(D_LargeChlorineTubes) + zc)], [0; 0; 0]*deg)
BarbVertCut := BoxF(BarbedElbowTorus_Origin + [
    (ElbowRadius(ND_ChemPlu) + OR(D_LargeChlorineTubes)) + zc;
    -ElbowRadius(ND_ChemPlu) - OR(D_LargeChlorineTubes) - zc;
    OR(D_LargeChlorineTubes) + zc
], BarbedElbowTorus_Origin + [0; (ElbowRadius(ND_ChemPlu) + OR(D_LargeChlorineTubes)) + zc; -(OR(D_LargeChlorineTubes) + zc)], [0; 0; 0]*deg)
InnerBarbTorus := Torus(BarbedElbowTorus_Origin, ElbowRadius(ND_ChemPlu), D_LargeChlorineTubes*0.5)
SubtractBarbParts := SubtractF(["DropTubeBarbedElbow"], "DeleteMe")
SelectElbowBarb := SelectLayer("DropTubeBarbedElbow")
ElbowBarbThreadOuter := CylinderF(DropTubeTee_Origin + [0; SocketDepth(ND_ChemPlu); 0], OR(D_LargeChlorineTubes), SocketDepth(ND_ChemPlu), [90; 0; 0]*deg)
ElbowBarbThreadInner := CylinderF(DropTubeTee_Origin + [0; SocketDepth(ND_ChemPlu); 0], D_LargeChlorineTubes*0.5, SocketDepth(ND_ChemPlu), [90; 0; 0]*deg)
ElbowBarbInner := CylinderF(DropTubeBarbEdge_Origin, 0.5*D_LargeChlorineTubes, DropTubeBarbEdge_Origin[0] - BarbedElbowTorus_Origin[0], [0; 0; 0]*deg)
RotateElbowBarb := Rotate3D_All(DropTubeTee_Origin + [0; SocketDepth(ND_ChemPlu); 0], "y", 90 deg)
DropTubeBarbedElbow := stack(DropTubeBarbedElbowLyr, OuterBarbTorus, DropTubeBarbedElbowFrz, BarbHorizCut, BarbVertCut, InnerBarbTorus, GroupDelete, SubtractBarbParts, SelectElbowBarb, view("r"), BarbEdgeCircle, BarbWideCircle, view("t"), LoftElbowBarb, ElbowBarbThreadOuter, DropTubeBarbedElbowFrz, ElbowBarbThreadInner, ElbowBarbInner, GroupDelete, SubtractBarbParts, SelectElbowBarb, RotateElbowBarb, DropTubeBarbedElbowFrz)
DropTubeBushingLyr := layer_new("DropTubeBushing", green)
DropTubeBushingOuter := CylinderF(DropTubeTee_Origin + [0; SocketDepth(ND_ChemPlu); 0], OR(ND_ChemPlu), SocketDepth(ND_ChemPlu), [90; 0; 0]*deg)
DropTubeBushingFrz := FreezeLayer("DropTubeBushing")
DropTubeBushingInner := CylinderF(DropTubeTee_Origin + [0; SocketDepth(ND_ChemPlu); 0], OR(D_LargeChlorineTubes), SocketDepth(ND_ChemPlu), [90; 0; 0]*deg)
SubtractBushing := SubtractF(["DropTubeBushing"], "DeleteMe")
DropTubeBushingScript := stack(DropTubeBushingLyr, DropTubeBushingOuter, DropTubeBushingFrz, DropTubeBushingInner, GroupDelete, SubtractBushing)
DropTubeFittingsLyr := layer_new("DropTubeFittings", green)
DropTubeTee := TeeF(DropTubeTee_Origin, [0; 90; 0]*deg, ND_ChemPlu, PS_Fi)
DropTubeBarbLower := TBarbF(DropTubeBarbLower_Origin, [0; 90; 0]*deg, ND_ChemPlu, D_LargeChlorineTubes, PS_Fi)
DropTubeFittingsFrz := FreezeLayer("DropTubeFittings")
DropTubePlumbing := stack(DropTubeBarbedElbow, DropTubeBushingScript, DropTubeFittingsLyr, DropTubeTee, DropTubeBarbLower, DropTubeFittingsFrz)
# Float and Counterweight
R_Cord := 0.25 cm
CdcFloat_Origin := [
    FlowMeteringTank_Origin[0] - L_EtMin - T_Et - T_MountingPlate/2 + L_CdcLeverArm/2 - L_HoleOffset - L_EtFloat/2;
    FlowMeteringTank_Origin[1] + S_Fitting/4;
    FlowMeteringTank_Origin[2] + L_LfomUnion - SD_LfomUnion/2
]
CdcFloatLyr := layer_new("CdcFloat", yellow)
CdcFloat := BoxF(CdcFloat_Origin, CdcFloat_Origin + [L_EtFloat; L_EtFloat; H_EtFloat], [0; 0; 0]*deg)
CdcFloatFreeze := FreezeLayer("CdcFloat")
CdcCordLayer := layer_new("CdcFloatCord", yellow)
CdcCord := CylinderF([L_EtFloat/2; L_EtFloat/2; H_EtFloat] + CdcFloat_Origin, R_Cord, Z_LeverArmFulcrum - (FlowMeteringTank_Origin[2] + H_Et - H_Freeboard - HL_Lfom - HL_EtOverflow + H_EtFloat/2), [0; 90]*deg)
CdcCordFrz := FreezeLayer("CdcFloatCord")
T_Counterweight := (2 + 3/16)*in = 0.0555625 m  # based on 5 lb counterbalance weight from mcmaster carr ($50) -- problem: made of cast iron
L_CounterweightCord := H_Et - 10 cm - S_Fitting/2 - T_Counterweight = 0.0744492 m
R_Counterweight := (3 + 3/4)/2*in = 0.047625 m
CdcCounterweightCordLyr := layer_new("CounterweightCord", red)
CdcCounterweightCord := CylinderF([
    FlowMeteringTank_Origin[0] - L_EtMin - T_Et - L_CdcLeverArm/2 + L_HoleOffset - T_MountingPlate/2;
    FlowMeteringTank_Origin[1] + 0.5*(L_EtFloat + 0.5*S_Fitting);
    Z_LeverArmFulcrum
], 0.25 cm, L_CounterweightCord, [0; 270]*deg)
CdcCounterweightCordFrz := FreezeLayer("CounterweightCord")
CdcCounterweightLyr := layer_new("Counterweight", red)
CounterweightDraw := CylinderF([
    FlowMeteringTank_Origin[0] - L_EtMin - T_Et - L_CdcLeverArm/2 + L_HoleOffset - T_MountingPlate/2;
    FlowMeteringTank_Origin[1] + L_EtFloat/2 + S_Fitting/4;
    Z_LeverArmFulcrum - L_CounterweightCord - T_Counterweight
], R_Counterweight, T_Counterweight, [0; 90]*deg)
CdcCounterweightFrz := FreezeLayer("Counterweight")
CounterweightScript := stack(CdcCounterweightCordLyr, CdcCounterweightCord, CdcCounterweightCordFrz, CdcCounterweightLyr, CounterweightDraw, CdcCounterweightFrz)
CdcFloatScript := stack(CdcFloatLyr, CdcFloat, CdcFloatFreeze, CdcCordLayer, CdcCord, CdcCordFrz)
# Sludge Handling
SludgeDrumLyr := layer_new("SludgeDrum", blue3)
SludgeDrum := CylinderF(SludgeDrum_Origin, 0.5*D_Drum + T_ChemTankWall, H_Drum + T_ChemTankWall, [0; 90]*deg)
SludgeDrumFrz := FreezeLayer("SludgeDrum")
SludgeDrumInner := CylinderF(SludgeDrum_Origin + [0; 0; T_ChemTankWall], D_Drum/2, H_Drum, [0; 90]*deg)
HollowDrum := SubtractF(["SludgeDrum"], "DeleteMe")
SludgeDrumScript := stack(SludgeDrumLyr, SludgeDrum, SludgeDrumFrz, SludgeDrumInner, GroupDelete, HollowDrum)
SludgeDrumFittingsLyr := layer_new("SludgeDrumFittings", green)
SludgeDrumBulkhead := InsertDwg(BulkheadDwg, SludgeDrumBulkhead_Origin, ND_SludgeDrumDrain, 270 deg)
SludgeDrumFTA := CouplingF(SludgeDrumFTA_Origin, [90; 0; 0]*deg, ND_SludgeDrumDrain, PS_Fi)
SludgeDrumPreValveMTA := MaleAdapterF(SludgeDrumPreValveMTA_Origin, [90; 0; 0]*deg, ND_SludgeDrumDrain, PS_Fi)
SludgeDrumValve := InsertDwg(BallValveDwg, SludgeDrumValve_Origin, ND_SludgeDrumDrain, 90 deg)
SludgeDrumPostValveMTA := MaleAdapterF(SludgeDrumPostValveMTA_Origin, [270; 0; 0]*deg, ND_SludgeDrumDrain, PS_Fi)
SludgeDrumElbow := ElbowF(SludgeDrumElbow_Origin, [180; 90; 0]*deg, ND_SludgeDrumDrain, PS_Fi)
SludgeDrumUnion := UnionF(SludgeDrumUnion_Origin, [0; 90; 0]*deg, ND_SludgeDrumDrain, PS_Fi)
SludgeDrumFitFrz := FreezeLayer("SludgeDrumFittings")
SludgeDrumFittings := stack(SludgeDrumFittingsLyr, SludgeDrumBulkhead, SludgeDrumFTA, SludgeDrumPreValveMTA, SludgeDrumValve, SludgeDrumPostValveMTA, SludgeDrumElbow, SludgeDrumUnion, SludgeDrumFitFrz)
SludgeScript := stack(SludgeDrumScript, SludgeDrumFittings)
D_LfomOrifices = 3 in/8
# [component: inputs stack(Facility, StandScript, TankScript, ChemTanksScript, EntranceDetails, ChlorPlu, CdcLeverArm_Script, CHTScript, ChlorManifoldPlu, DropTubePlumbing, CounterweightScript, CdcFloatScript, SludgeScript)]
CdcFloatScript
# ChemTanksScript | DropTubePlumbing | CounterweightScript | SludgeScript
L_Paper := 10.5 in
# Values of L.Paper and W.Paper can be changed depending on the desired paper size. 7.5" x 10.5" were chosen to give a .5" margin on either side of the paper to account for differences in printer margin settings.
W_Paper := 7.5 in
XStartPoint := LfomCoupling_Origin[0]
# This origin is defined in the LFOM modular code.
YStartPoint := LfomCoupling_Origin[1]
OrificeCenterDist := D_LfomOrifices + S_LfomOrificesMin
# The length of the layouts -- this was originally written to fall between orifices, but with the offset of alternating rows by half the orifice diameter, the border fell directly on the center line of the orifice. This would pose a problem when piecing the sheets together on-site, as the orifice center may not be exact. L.Border is offset by the orifice diameter to avoid this issue.
L_Border := floor(L_Paper/OrificeCenterDist)*OrificeCenterDist - D_LfomOrifices
W_Border := floor(W_Paper/(H_LfomOrifices[1] - H_LfomOrifices[0]))*(H_LfomOrifices[1] - H_LfomOrifices[0])
# The width of the layouts -- this is as close as possible to W.Paper without cutting off any orifices.
Labels := ["A"; "B"; "C"; "D"; "E"; "F"; "G"; "H"; "I"; "J"; "K"; "L"; "M"; "O"; "P"]
# Variables
# Create Layouts
LabelLayout(Text, TextSize, Start, End, Rotation) := concat("-mtext ", point(Start), sp, "height ", stringit(TextSize), sp, "r ", stringit(Rotation), sp, point(End), sp, Text)
CreateLayout(LayoutName) := concat("-layout ", "n ", stringit(LayoutName), sp)
SetLayout(LayoutName) := concat("-layout ", "s ", stringit(LayoutName), sp)
VPortErase(VPort1, VPort2) := concat(".erase ", point(VPort1), sp, point(VPort2), sp)
VPortNew(Corner1, Corner2) := concat("-vport ", point(Corner1), sp, point(Corner2), sp, "z ", "e")
ChangeView(CornerA, CornerB) := concat("ms ", "z ", "w ", point(CornerA), sp, point(CornerB), sp, "ps")
N_HLayouts :=
    Layouts ← round((OrificeCenterDist*N_LfomOrifices[0] + D_LfomOrifices)/L_Border) if (OrificeCenterDist*N_LfomOrifices[0] + D_LfomOrifices)/L_Border > 1.5
    Layouts ← ceil((OrificeCenterDist*N_LfomOrifices[0] + D_LfomOrifices)/L_Border) if (OrificeCenterDist*N_LfomOrifices[0] + D_LfomOrifices)/L_Border < 1.5
    return Layouts
# Calculates the number of horizontal layouts
# Calculates the number of vertical layouts (other than the first row of layouts).
N_VLayouts := round((H_LfomOrifices[last(H_LfomOrifices)] + D_LfomOrifices/2)/W_Border)
N_TLayouts :=
    Layouts ← round((OrificeCenterDist*N_LfomOrifices[last(N_LfomOrifices)] + D_LfomOrifices)/L_Border) if (OrificeCenterDist*N_LfomOrifices[last(N_LfomOrifices)] + D_LfomOrifices)/L_Border > 1
    Layouts ← ceil((OrificeCenterDist*N_LfomOrifices[last(N_LfomOrifices)] + D_LfomOrifices)/L_Border) if (OrificeCenterDist*N_LfomOrifices[last(N_LfomOrifices)] + D_LfomOrifices)/L_Border < 1
    return Layouts
# Calculates the number of horizontal layouts in the second row. Originally, the second row of layouts was the top row, however, with changes to the LFOM code, there can now be three or more vertical layouts. A way to calculate the number of orifices in these top rows must be determined.
SetUpHLayouts(N_Layout) :=
    Num ← 1 m
    Layout ← CreateLayout(Num)
    for a ∈ 1 .. N_Layout
        if a == 1
            Layout ← stack(Layout, SetLayout(Num), VPortErase([0; 0]*m, [10; 7.7]*m), VPortNew([.013; .013]*m, [.013 m + L_Border + D_LfomOrifices/2; W_Border + .013 m]), ChangeView([
                XStartPoint - D_LfomOrifices/2 + ((floor(L_Paper/OrificeCenterDist)*OrificeCenterDist)*(a - 1));
                YStartPoint
            ], [XStartPoint + L_Border*a; YStartPoint + W_Border]))
        if a > 1
            Layout ← stack(Layout, CreateLayout(Num), SetLayout(Num), VPortErase([0; 0]*m, [10; 7.7]*m), VPortNew([.013; .013]*m, [.013 m + L_Border + D_LfomOrifices/2; W_Border + .013 m]), ChangeView([
                XStartPoint - D_LfomOrifices/2 + (floor(L_Paper/OrificeCenterDist)*OrificeCenterDist)*(a - 1);
                YStartPoint
            ], [XStartPoint + L_Border*a; YStartPoint + W_Border]))
        Num ← Num + 1 m
    return Layout
# Renders layouts in bottom row. It might be helpful to combine these three functions (SetUpHLayouts,SetUpTLayouts, and SetUpVLayouts) into one function -- perhaps nested for-loops, as if one were traversing a matrix, now that the LFOM design has been modified for higher flow rates. The design now includes a 40cm LFOM for high flow rates, so there is a need for three rows  of layouts.
SetUpTLayouts(N_Layout) :=
    Num ← (N_HLayouts + 1)*m + 1 m
    Layout ← CreateLayout(Num)
    for c ∈ N_Layout
        if c == 1
            Layout ← stack(Layout, SetLayout(Num), VPortErase([0; 0]*m, [10; 7.7]*m), VPortNew([.013; .013]*m, [.013 m + L_Border + D_LfomOrifices/2; W_Border + .013 m]), ChangeView([
                XStartPoint - D_LfomOrifices/2 + ((floor(L_Paper/OrificeCenterDist)*OrificeCenterDist)*c);
                YStartPoint + W_Border
            ], [XStartPoint + L_Border*(c + 1); YStartPoint + 2*W_Border]))
        if c > 1
            Layout ← stack(Layout, CreateLayout(Num), SetLayout(Num), VPortErase([0; 0]*m, [10; 7.7]*m), VPortNew([.013; .013]*m, [.013 m + L_Border + D_LfomOrifices/2; W_Border + .013 m]), ChangeView([
                XStartPoint - D_LfomOrifices/2 + ((floor(L_Paper/OrificeCenterDist)*OrificeCenterDist)*c);
                YStartPoint + W_Border
            ], [XStartPoint + L_Border*(c + 1); YStartPoint + 2*W_Border]))
        Num ← Num + 1 m
    return Layout
# Renders layouts in second row (other than the first layout of the second row -- this is accounted for in SetUpVLayouts). Only used if N.TLayouts>1. See comment above about LFOM changes. This function needs to be modified.
SetUpVLayouts(N_Layout) :=
    Num ← N_HLayouts*m + 1 m
    Layout ← CreateLayout(Num)
    for b ∈ 1 .. N_Layout
        if b == 1
            Layout ← stack(Layout, SetLayout(Num), VPortErase([0; 0]*m, [10; 7.7]*m), VPortNew([.013; .013]*m, [.013 m + L_Border + D_LfomOrifices/2; W_Border + .013 m]), ChangeView([
                XStartPoint - D_LfomOrifices/2 + ((floor(L_Paper/OrificeCenterDist)*OrificeCenterDist)*(b - 1));
                YStartPoint + W_Border*b
            ], [XStartPoint + L_Border*b; YStartPoint + W_Border*(b + 1)]))
        if b > 1
            Layout ← stack(Layout, CreateLayout(Num), SetLayout(Num), VPortErase([0; 0]*m, [10; 7.7]*m), VPortNew([.013; .013]*m, [.013 m + L_Border + D_LfomOrifices/2; W_Border + .013 m]), ChangeView([
                XStartPoint - D_LfomOrifices/2 + ((floor(L_Paper/OrificeCenterDist)*OrificeCenterDist)*(b - 1));
                YStartPoint + W_Border*b
            ], [XStartPoint + L_Border*b; YStartPoint + W_Border*(b + 1)]))
        Num ← Num + N_TLayouts*m + 1 m
    Layout ← stack(Layout, SetUpTLayouts(N_TLayouts)) if N_TLayouts > 1
    return Layout
# Renders vertical layouts -- does not work properly when more than two rows of layouts are needed (i.e. for flow rates above 60L/s). (Needs to be modified -- see first comment.)
DimStyle(H_Component) := concat("-dimstyle ", "st ", "dimtxt ", stringit(H_Component), sp, "dimasz ", stringit(H_Component), sp, "dimgap ", stringit(H_Component), sp, "dimcen ", stringit(0.0000 m), sp)
# Changes dimension style for last orifice of bottom row
LfomDiameterDim := concat(DimStyle(.005 m), "_dimdiameter ", point([
    XStartPoint + (OrificeCenterDist*N_LfomOrifices[0]) - D_LfomOrifices/2 - S_LfomOrificesMin + (D_LfomOrifices/2*sqrt(2)/2);
    H_LfomOrifices[0] + (D_LfomOrifices/2*sqrt(2)/2)
]), sp, point([
    XStartPoint + (OrificeCenterDist*N_LfomOrifices[0] - D_LfomOrifices/2 + S_LfomOrificesMin) + (D_LfomOrifices/2*sqrt(2)/2);
    H_LfomOrifices[0] + (D_LfomOrifices/2*sqrt(2)/2)
]))  # Draws dimension
Boundary := concat("_line ", point([XStartPoint - D_LfomOrifices/2; YStartPoint + H_LfomOrifices[0] - D_LfomOrifices/2]), sp, point([
    XStartPoint - D_LfomOrifices/2;
    YStartPoint + H_LfomOrifices[last(H_LfomOrifices)] + W_Border - D_LfomOrifices/2
]), sp, "_line ", point([XStartPoint - D_LfomOrifices/2; YStartPoint + H_LfomOrifices[0] - D_LfomOrifices/2]), sp, point([
    (XStartPoint + N_HLayouts*L_Border + ((N_HLayouts - 1)*D_LfomOrifices/2));
    YStartPoint + H_LfomOrifices[0] - D_LfomOrifices/2
]), sp)
Zoom := concat("z ", "e")
CreateLabel(Str1, Str2) := concat("Page ", Str1, Str2)
CopyText(Object, BasePt, DisPt) := concat("copy ", point(Object), sp, point(BasePt), sp, sp, "mode ", "single ", sp, point(DisPt))
DelineateL(XStartPoint, YStartPoint) := concat("_line ", point([XStartPoint + L_Border; YStartPoint + (H_LfomOrifices[0] - D_LfomOrifices/2)]), sp, point([
    XStartPoint + L_Border;
    YStartPoint + H_LfomOrifices[last(H_LfomOrifices)] + W_Border - D_LfomOrifices/2
]), sp)  # Inserts border "lengthwise"
LabelT(XStartPoint) :=
    TempX ← XStartPoint
    Line ← Boundary
    c ← 0
    while XStartPoint < TempX + ((N_TLayouts - 1)*L_Border)
        Label_MiddleS ← [XStartPoint + L_Border - 1 cm; YStartPoint + (3/2*W_Border) - 1 cm]
        Label_MiddleE ← [XStartPoint + L_Border - 1 cm; YStartPoint + (3/2*W_Border) + 2 cm]
        Label_TopS ← [XStartPoint + L_Border - 1 cm; YStartPoint + 2*W_Border - 2 cm]
        Label_TopE ← [XStartPoint + L_Border - .5 cm; YStartPoint + 2*W_Border - .5 cm]
        Label_BottS ← [XStartPoint + L_Border - 5 cm; YStartPoint + W_Border - 1 cm]
        Label_BottE ← [XStartPoint + L_Border - 2 cm; YStartPoint + W_Border - .5 cm]
        Line ← stack(Line, Zoom, LabelLayout(CreateLabel(Labels[:, 0][c + N_HLayouts], Labels[:, 0][c + N_HLayouts + 1]), .005 m, Label_MiddleS, Label_MiddleE, 90 m), "", MirrorLast([XStartPoint + L_Border; YStartPoint], [XStartPoint + L_Border; YStartPoint + 2*W_Border], "n"), LabelLayout(Labels[:, 0][c + N_HLayouts], .005 m, Label_TopS, Label_TopE, 0 m), "", LabelLayout(CreateLabel(Labels[:, 0][c], Labels[:, 0][c + N_HLayouts]), .005 m, Label_BottS, Label_BottE, 0 m), "", MirrorLast([(XStartPoint + L_Border)/2; YStartPoint + W_Border], [XStartPoint + L_Border; YStartPoint + W_Border], "n"), Zoom)
        XStartPoint ← XStartPoint + L_Border + D_LfomOrifices/2
        c ← c + 1
    Label_TopS ← [XStartPoint + L_Border - 1 cm; YStartPoint + 2*W_Border - 2 cm]
    Label_TopE ← [XStartPoint + L_Border - .5 cm; YStartPoint + 2*W_Border - .5 cm]
    Label_BottS ← [XStartPoint + L_Border - 5 cm; YStartPoint + W_Border - 1 cm]
    Label_BottE ← [XStartPoint + L_Border - 2 cm; YStartPoint + W_Border - .5 cm]
    Line ← stack(Line, Zoom, LabelLayout(Labels[:, 0][c + N_HLayouts], .005 m, Label_TopS, Label_TopE, 0 m), "", LabelLayout(CreateLabel(Labels[:, 0][c], Labels[:, 0][c + N_HLayouts]), .005 m, Label_BottS, Label_BottE, 0 m), "", MirrorLast([(XStartPoint + L_Border)/2; YStartPoint + W_Border], [XStartPoint + L_Border; YStartPoint + W_Border], "n"), Zoom) if XStartPoint < TempX + (N_TLayouts*L_Border)
    return Line
# Labels the layout for the second row. This function was created before the 40cm LFOM design, so it must be modified to account for multiple rows of layouts.
DelineateLMultiple(XStartPoint, YStartPoint) :=
    TempX ← XStartPoint
    Line ← Boundary
    b ← 0
    while XStartPoint < TempX + ((N_HLayouts - 1)*L_Border)
        Label_MiddleS ← [XStartPoint + L_Border - 1 cm; (YStartPoint + W_Border)/2 - 1 cm]
        Label_MiddleE ← [XStartPoint + L_Border - 1 cm; (YStartPoint + W_Border)/2 + 2 cm]
        Label_TopS ← [XStartPoint + L_Border - 1 cm; YStartPoint + W_Border - 2 cm]
        Label_TopE ← [XStartPoint + L_Border - .5 cm; YStartPoint + W_Border - .5 cm]
        Line ← stack(Line, DelineateL(XStartPoint, YStartPoint), Zoom, LabelLayout(CreateLabel(Labels[:, 0][b], Labels[:, 0][b + 1]), .005 m, Label_MiddleS, Label_MiddleE, 90 m), "", MirrorLast([XStartPoint + L_Border; YStartPoint], [
            XStartPoint + L_Border;
            YStartPoint + H_LfomOrifices[last(H_LfomOrifices)] + W_Border - D_LfomOrifices/2
        ], "n"), LabelLayout(Labels[:, 0][b], .005 m, Label_TopS, Label_TopE, 0 m), "", Zoom)
        XStartPoint ← (XStartPoint + L_Border + D_LfomOrifices/2)
        b ← b + 1
    Label_TopS ← [XStartPoint + L_Border - 1 cm; YStartPoint + W_Border - 2 cm]
    Label_TopE ← [XStartPoint + L_Border - .5 cm; YStartPoint + W_Border - .5 cm]
    Line ← stack(Line, DelineateL(XStartPoint, YStartPoint), Zoom, LabelLayout(Labels[:, 0][b], .005 m, Label_TopS, Label_TopE, 0 m), "", Zoom) if XStartPoint < TempX + (N_HLayouts*L_Border)
    return Line  # Delineates the first row of layouts and labels them appropriately.
DelineateW(XStartPoint, YStartPoint) := concat("_line ", point([XStartPoint - D_LfomOrifices/2; YStartPoint + W_Border]), sp, point([XStartPoint + N_HLayouts*L_Border + (N_HLayouts - 1)*D_LfomOrifices/2; YStartPoint + W_Border]), sp)
# Inserts border vertically
DelineateWMultiple(XStartPoint, YStartPoint) :=
    TempY ← YStartPoint
    Line ← Boundary
    a ← 0
    while YStartPoint ≤ TempY + N_VLayouts*W_Border
        Line ← stack(Line, DelineateW(XStartPoint, YStartPoint))
        YStartPoint ← YStartPoint + W_Border
        a ← a + 1
    return Line  # Inserts multiple vertical borders
# Drawing Functions
# Template Code
LfomOrificesTemplate :=
    Local ← view("t")
    for h ∈ 0 .. last(H_LfomOrifices)
        origin ← [
            XStartPoint + (D_LfomOrifices + S_LfomOrificesMin)/2*(mod(h, 2) == 0);
            YStartPoint + H_LfomOrifices[h]
        ]
        Crosshair ← concat("z ", "e ", "_line ", point(origin[:, 0] - [D_LfomOrifices/4; 0 m]), sp, point(origin[:, 0] + [D_LfomOrifices/4; 0 m]), sp, sp, "_line ", point(origin[:, 0] - [0 m; D_LfomOrifices/4]), sp, point(origin[:, 0] + [0 m; D_LfomOrifices/4]), sp)
        PointArray ← [
            [origin[0] - D_LfomOrifices/3; origin[1]];
            [origin[0]; origin[1] - D_LfomOrifices/3];
            [origin[0] + (D_LfomOrifices/2*sqrt(2)/2); origin[1]];
            [origin[0]; origin[1] + (D_LfomOrifices/2*sqrt(2)/2)]
        ]
        Local ← stack(Local, circle(origin, D_LfomOrifices/20), circle(origin, D_LfomOrifices/2), Crosshair) if N_LfomOrifices[h] ≠ 0
        Local ← stack(Local, ArrayMultiple(PointArray, 1, N_LfomOrifices[h], 0, OrificeCenterDist)) if N_LfomOrifices[h] > 1
    Local ← stack(Local, LfomDiameterDim, DelineateLMultiple(XStartPoint, YStartPoint), DelineateWMultiple(XStartPoint, YStartPoint), LabelT(XStartPoint), SetUpHLayouts(N_HLayouts), SetUpVLayouts(N_VLayouts))
    return Local  # Code to generate the template: brings together all of the functions above.
LfomTemplate :=
    origin ← [(D_LfomOrifices + S_LfomOrificesMin)/2; D_LfomOrifices/2]
    Crosshair ← stack(ZoomWindow([0; 0], [2*(D_LfomOrifices + S_LfomOrificesMin); H_LfomOrifices[last(H_LfomOrifices)] + D_LfomOrifices]), concat("_line ", point(origin[:, 0] - [D_LfomOrifices/4; 0 m]), sp, point(origin[:, 0] + [D_LfomOrifices/4; 0 m]), sp, sp, "_line ", point(origin[:, 0] - [0 m; D_LfomOrifices/4]), sp, point(origin[:, 0] + [0 m; D_LfomOrifices/4]), sp))
    Circle ← circle(origin, D_LfomOrifices/2)
    Array ← Array_All(1, N_LfomOrifices[0], D_LfomOrifices + S_LfomOrificesMin)
    FirstRow ← stack(Crosshair, Circle, Array)
    for i ∈ 1 .. last(H_LfomOrifices)
        NextOrigin ← [
            round((N_LfomOrifices[0] - N_LfomOrifices[i])/2)*(D_LfomOrifices + S_LfomOrificesMin) + (D_LfomOrifices + S_LfomOrificesMin)/2*((mod(i, 2) == 1) + 1);
            H_LfomOrifices[i]
        ]
        NextCrosshair ← concat("_line ", point(NextOrigin[:, 0] - [D_LfomOrifices/4; 0 m]), sp, point(NextOrigin[:, 0] + [D_LfomOrifices/4; 0 m]), sp, sp, "_line ", point(NextOrigin[:, 0] - [0 m; D_LfomOrifices/4]), sp, point(NextOrigin[:, 0] + [0 m; D_LfomOrifices/4]), sp)
        NextCircle ← circle(NextOrigin, D_LfomOrifices/2)
        ArrayRow ← concat("array", sp, point(NextOrigin[:, 0] - [(S_LfomOrificesMin + D_LfomOrifices)*0.5; D_LfomOrifices*0.55]), sp, point(NextOrigin[:, 0] + [(S_LfomOrificesMin + D_LfomOrifices)*0.5; D_LfomOrifices*0.55]), sp, sp, "r", sp, "col", sp, stringit_nounits(N_LfomOrifices[i]), sp, stringit(D_LfomOrifices + S_LfomOrificesMin), sp, "r", sp, "1", sp, stringit(D_LfomOrifices + S_LfomOrificesMin), sp, sp)
        FirstRow ← stack(FirstRow, ZoomWindow([0; 0], [2*(D_LfomOrifices + S_LfomOrificesMin); H_LfomOrifices[last(H_LfomOrifices)] + D_LfomOrifices]), NextCrosshair, NextCircle, ArrayRow)
    return FirstRow
10 cm = 3.93701 in
2*D_LfomOrifices + S_LfomOrificesMin = 1.1437 in
H_LfomOrifices[last(H_LfomOrifices)] - H_LfomOrifices[0] = 3.44488 in
D_LfomOrifices = 9.525 mm
-(N_LfomOrifices[0]*(D_LfomOrifices + S_LfomOrificesMin) - S_LfomOrificesMin) + 11.5 in = 1.90059 in
# [component: inputs LfomTemplate]
ND_Thread := 1.5 in
ND_Barb := 3/8*in
EN := PS_Fi
OriginPoint := [0; 0; 0]
AngleVector := [0; 0; 0]*deg
