# Stand alone chemical dosers for India
# MathCAD References
Q_Plant := 3*L/s
# [reference: ExpertInputs.xmcd]
HL_LfomMin := 20 cm
HL_LfomMax := 20 cm
HL_CdcCoag := HL_LfomMin
HL_CdcChlorine := HL_LfomMin
EN_Chlorine := 2
# Note that the ratio of stock to max dose is the same for chlorine and coagulant and that gives the same design for each doser (given that the viscosity is almost the same for both stocks).
C_ChlorineDoseMax := 2*mg/L
# [reference: MathFunctions.xmcd]
# [reference: PipeDatabase May 2.xmcd]
# [reference: MaterialsDatabase.xmcd]
# [reference: FluidsFunctions.xmcd]
# [reference: CdcFunctions.xmcd]
# Assumptions
T_TankWall := 25 cm
L_Wall := 3 m
T_Et := 0.5 cm
T_MS := 4 mm
T_Separator := 15 cm
W_Wall := 3 m
T_FiLayer := 20 cm
PS_Fi := 2
L_TankOffset := 1.2 m
H_Wall := 3 m
S_Walkway := 75 cm
Vol_OverheadTank := L_Wall*W_Wall*H_Wall
H_Freeboard := 5 cm
T_Platform := 15 cm
# This is actual ID for 2.5 kg/cm^2 pipe
# all z's with reference to treatment room floor
Z_LowerPlatform := 1 m + H_Wall + T_TankWall
Z_EtBottom := Z_LowerPlatform + T_MS + T_Et
H_RoomShort := 2.8 m
L_RoofOverhang := 5 cm
H_CHTAboveEt := 10 cm
H_DrumOutlet := 10 cm
ND_Transmission := 3 in
ND_ChemDrain := 1.5 in
ND_ChemPlu := 1/2*in
# LFOM
# [reference: LFOM.xmcd]
H_LfomOrifices = [0.635; 2.635; 4.635; 6.635; 8.635; 10.635; 12.635; 14.635; 16.635; 18.635] cm
D_LfomOrifices = 8 in/16
ND_RMPipe = 4 in
N_LfomOrifices = [7; 4; 2; 2; 2; 1; 2; 1; 2; 1]
# DOUBLE CHECK LFOM ALGORITHM!!!!
# Entrance Tank
# Assume:
H_LeverFulcrumAboveEtTop := 5 cm
T_MountingPlate := 5 mm
W_MountingPlate := 4 cm
H_MountingOverlap := 5 cm
W_MountingBox := 1.5 cm
H_MountingPlate := H_LeverFulcrumAboveEtTop + W_MountingBox/2 + H_MountingOverlap
D_TubeAvailable := [2]*in/16
ND_RMPipe = 4 in
ND_EtFloat := 6 in
ND_EtDrain := 1.5 in
ND_Inlet := 3 in  # Assume Square
H_EtFloat := 5 cm
# line up inlet, lfom on left; float, drain on right
L_CdcLeverArm := 50 cm  # redefine so that lever arm sits within the stand
HL_EtDrainPipe := h_l(Q_Plant, 1.5 in, 4 m, K_PipeEnt + K_PipeExit + 2*K_El90, Nu_Water, E_Pvc) = 2.2041 m
# there should be at least 2m of available head if the drain pipe drops to the bottom
L_EtMin := max(ElbowRadius(ND_Inlet) + SocketDepth(ND_Inlet) + OD_Fitting(ND_Inlet), OD_Fitting(ND_RMPipe)) + 2*S_Fitting + L_CdcLeverArm + OR_Fitting(ND_EtFloat) - T_Et - W_MountingBox - T_MountingPlate/2 = 0.864006 m
W_EtMin := max(OD_Fitting(ND_Inlet) + OD_Fitting(ND_RMPipe), OD_Fitting(ND_EtFloat) + OD_Fitting(ND_EtDrain)) + 3*S_Fitting = 0.3913 m
2*OR_Fitting(ND_EtFloat) = 18.415 cm
HL_EtOverflow := Headloss_weir(Q_Plant, OD(ND_EtDrain)*π) = 0.0483697 m
ND_EtDrain = 1.5 in
H_Et := 2*S_Fitting + H_EtFloat/2 + HL_LfomMin + H_Freeboard + HL_EtOverflow = 0.42337 m
Z_LeverArmFulcrum := Z_EtBottom + H_Et + H_LeverFulcrumAboveEtTop
Z_UpperPlatform := Z_LeverArmFulcrum + 35 cm
H_RoomTall := Z_UpperPlatform + 1.8 m - T_TankWall - H_Wall
# Chem Doser, Storage, Calibration Columns
C_ChlorineDoseAvg := 1*mg/L
HL_CdcChlorine = 0.2 m
C_ChlorineStockMax := 1*gm/L
Ti_ChlorineEst := 11 day
L_ChlorineTube := 80 cm
D_ChlorineTube := 1/8*in
Q_ChlorineTube := Q_pipetotal(D_ChlorineTube, HL_CdcChlorine, L_ChlorineTube, Nu_Water, E_Pvc, K_CdcTube) = 4.91163 mL/s
Re_Pipe(Q_ChlorineTube, D_ChlorineTube, Nu_Water) = 1969.66  # laminar
C_ChlorineDoseMax = 0.002 kg/m^3
C_ChlorineStock := Q_Plant*C_ChlorineDoseMax/Q_ChlorineTube = 1.22159 gm/L
V_Solution := 27000*L/day*Ti_ChlorineEst*C_ChlorineDoseAvg/C_ChlorineStock = 243.126 L  # use tank volume of 200 L
V_Tank := 200 L
Ti_Chlorine := C_ChlorineStock*V_Tank/(C_ChlorineDoseAvg*27000*L/day) = 9.04882 day
H_Et = 0.42337 m
D_ChlorineTank := 23.5 in
H_ChlorineTank := 37.5 in
L_ChemPlatform := 4*S_Fitting + 2*D_ChlorineTank = 1.3938 m
W_ChemPlatform := max(D_ChlorineTank + 2*S_Fitting + S_Walkway, L_EtMin + L_CdcLeverArm + 2*T_Et + 3*S_Fitting) = 1.52401 m
H_DrumOutletAboveCHT := Z_UpperPlatform - Z_EtBottom - H_CHTAboveEt - H_Et + H_DrumOutlet = 0.4 m
D_LargeChlorineTubes := 3/8*in  # make all non-design tubes double the size of the design tube
L_TubeDrumToCHT := 2*H_DrumOutletAboveCHT
HL_TubeDrumToCHT := h_l(Q_ChlorineTube, D_LargeChlorineTubes, L_TubeDrumToCHT, K_PipeEnt + K_PipeExit, Nu_Water, E_Pvc) = 0.0023467 m
D_ChlorineFloatValveOrifice :=
    i ← 0
    while h_orifice(D_FltVlvOrificesAvail[i], Pi_VCOrifice, Q_ChlorineTube) ≥ H_DrumOutletAboveCHT - HL_TubeDrumToCHT - 5 cm
        i ← i + 1
    return max(D_FltVlvOrificesAvail[i], D_FltVlvOrificesAvail[1])
D_ChlorineFloatValveOrifice = 2.992 in/16  # use at least the second smallest orifice to prevent clogging
HL_ChlorineFloatValveOrifice := h_orifice(D_ChlorineFloatValveOrifice, Pi_VCOrifice, Q_ChlorineTube) = 0.987049 cm
# Calibration Column
Ti_Res := 0.25 min
Vol_ChlorCalCol := Ti_Res*Q_ChlorineTube
ND_ChlorCalCol := 1/2*in
H_CalColSF := 1.2
H_ChlorCalCol := round(H_CalColSF*Vol_ChlorCalCol/(IR(ND_ChlorCalCol, PS_Fi)^2*π)/(10 cm))*10*cm = 0.5 m
H_mL := cm^3/(IR(ND_ChlorCalCol, PS_Fi)^2*π) = 5.10108 mm  # don't want the height of a mL to be too small, makes readings hard to take
# AutoCAD References
# AutoCAD drawing programs:
# Translators:
# These are the codes that take MathCAD outputs and create AutoCAD scripts that are used to draw the plant (formerly Basics)
# [reference: MtoATranslators.xmcd]
# The wrapped MtoA translator contains the functions that the user will want to access. These functions will draw pieces with full functionality - specifying the location, dimension, and orientation of the object. Also, it contains layer control and subtraction capabilities for grouped objects.
# [reference: MtoATranslatorsWrapped.xmcd]
# Drawing functions:
# [reference: ChannelF.xmcd]
# [reference: PlumbingF May.xmcd]
# [reference: TankF.xmcd]
# [reference: StairsF.xmcd]
# Chemical Dose Controller For Overhead Tanks
# Origin points
Tank_Origin := [0; 0; 0]*m
W_SquarePipe := 2 cm
Room_Origin := Tank_Origin + [0; 0; H_Wall + T_TankWall]
Origin_UpperPlatform := [Room_Origin[0] - 2*S_Fitting; Room_Origin[1] + S_Fitting; Z_UpperPlatform]
Origin_LowerPlatform := [Origin_UpperPlatform[0]; Origin_UpperPlatform[1]; Z_LowerPlatform]
FlowMeteringTank_Origin := [-S_Fitting; W_ChemPlatform - S_Fitting - W_EtMin; T_MS + T_Et] + Origin_LowerPlatform
ChlorTank_Origin := [
    -S_Fitting - D_ChlorineTank/2;
    -(S_Fitting + D_ChlorineTank/2) + W_ChemPlatform - 2*MaleAdapterLength(ND_ChemPlu) - BallValveLength(ND_ChemPlu) + 2*BallValveSocket(ND_ChemPlu);
    T_MS
] + Origin_UpperPlatform
ChlorOutlet_Origin := [ChlorTank_Origin[0]; ChlorTank_Origin[1] + D_ChlorineTank/2; ChlorTank_Origin[2] + B_StockOutlet]
ChlorDeliveryFTA1_Origin := ChlorOutlet_Origin + [0; BulkheadThreadLength(ND_ChemPlu); 0]
ChlorDeliveryMTA1_Origin := ChlorDeliveryFTA1_Origin + [0; CouplingLength(ND_ChemPlu); 0]
ChlorDeliveryValve_Origin := ChlorDeliveryMTA1_Origin + [0; -SocketDepth(ND_ChemPlu) + MaleAdapterLength(ND_ChemPlu); 0]
ChlorDrainBulkhead_Origin := ChlorTank_Origin + [0; D_ChlorineTank/6; T_ChemTankWall]  # keep this in top view
ChlorDrainMTA_Origin := ChlorDrainBulkhead_Origin + [0; 0; -BulkheadThreadLength(ND_ChemDrain)]
ChlorDrainUnion_Origin := ChlorDrainMTA_Origin + [0; 0; 2*SocketDepth(ND_ChemDrain) - CouplingLength(ND_ChemDrain) - UnionLength(ND_ChemDrain)]
ChlorDrainTee_Origin := [0; 0; -SocketDepth(ND_ChemDrain)] + ChlorDrainUnion_Origin
ChlorDrainReducer_Origin := ChlorDrainTee_Origin + [0; ShortTeeLength(ND_ChemDrain) + 2*SocketDepth(ND_ChemDrain); -ShortTeeLength(ND_ChemDrain)]
ChlorDeliveryMTA2_Origin := ChlorDeliveryValve_Origin + [
    0;
    -2*BallValveSocket(ND_ChemPlu) + BallValveLength(ND_ChemPlu) + MaleAdapterLength(ND_ChemPlu) - SocketDepth(ND_ChemPlu);
    0
]
ChlorDeliveryElbow_Origin := ChlorDeliveryMTA2_Origin + [0; 2*SocketDepth(ND_ChemPlu); 0]
ChlorDeliveryUnion_Origin := ChlorDeliveryElbow_Origin + [0; ElbowRadius(ND_ChemPlu); -ElbowRadius(ND_ChemPlu) - UnionLength(ND_ChemPlu)] = [-0.44845; 1.60909; 5.12479] m
ChlorDeliveryElbow1_Origin := ChlorDeliveryUnion_Origin + [
    ElbowRadius(ND_ChemPlu);
    0;
    -SocketDepth(ND_ChemPlu) - ElbowRadius(ND_ChemPlu) - SocketDepth(ND_ChemPlu)
] = [-0.4337; 1.60909; 5.07604] m
ChlorDeliveryTee2_Origin := [
    Origin_UpperPlatform[0] - W_SquarePipe/2 - ShortTeeLength(ND_ChemPlu);
    ChlorDeliveryElbow1_Origin[1];
    ChlorDeliveryElbow1_Origin[2]
] = [-0.12475; 1.60909; 5.07604] m
ChlorSedTrapTee_Origin := ChlorDeliveryTee2_Origin + [-2*SocketDepth(ND_ChemPlu) - ShortTeeLength(ND_ChemPlu); 0; -ShortTeeLength(ND_ChemPlu)]
ChlorDeliveryFTA2_Origin := ChlorDeliveryTee2_Origin + [ShortTeeLength(ND_ChemPlu); 0; -ShortTeeLength(ND_ChemPlu) - 2*SocketDepth(ND_ChemPlu)]
ChlorCHTBarb_Origin := ChlorDeliveryFTA2_Origin + [0; 0; SocketDepth(ND_ChemPlu) - CouplingLength(ND_ChemPlu)] = [-0.11; 1.60909; 4.99745] m
ChlorAirReleasePipe_Origin := ChlorDeliveryTee2_Origin + [ShortTeeLength(ND_ChemPlu); 0; ShortTeeLength(ND_ChemPlu)]
L_ChlorAirRelease := UnionLength(ND_ChemPlu) + 2*SocketDepth(ND_ChemPlu) + ElbowRadius(ND_ChemPlu) + OR_Fitting(ND_ChemPlu)
ChlorAirReleaseValve_Origin := ChlorAirReleasePipe_Origin + [0; 0; L_ChlorAirRelease]
L_SedTrapPipe := ChlorSedTrapTee_Origin[2] - ChlorDrainReducer_Origin[2] - ElbowRadius(ND_ChemPlu) - 2*SocketDepth(ND_ChemPlu) - BallValveLength(ND_ChemPlu) - 2*(MaleAdapterLength(ND_ChemPlu) - SocketDepth(ND_ChemPlu) - BallValveSocket(ND_ChemPlu))
ChlorSedTrapPipe_Origin := ChlorSedTrapTee_Origin
ReducerLengthDrain := CouplingLength(ND_ChemDrain) - SocketDepth(ND_ChemDrain) - SocketDepth(ND_ChemPlu)
L_SedTrapHorizPipe := ChlorDeliveryUnion_Origin[1] - ChlorDrainBulkhead_Origin[1] - ElbowRadius(ND_ChemPlu) - ShortTeeLength(ND_ChemDrain) - 2*SocketDepth(ND_ChemDrain) - ReducerLengthDrain + SocketDepth(ND_ChemPlu)
L_DeliveryPipeHoriz := ChlorSedTrapTee_Origin[0] - ChlorDeliveryElbow1_Origin[0] - ShortTeeLength(ND_ChemPlu)
ChlorSedTrapMTA1_Origin := ChlorSedTrapPipe_Origin + [0; 0; -L_SedTrapPipe]
ChlorDeliveryDrainValve_Origin := ChlorSedTrapMTA1_Origin + [0; 0; SocketDepth(ND_ChemPlu) - MaleAdapterLength(ND_ChemPlu)]
ChlorSedTrapMTA2_Origin := ChlorDeliveryDrainValve_Origin + [
    0;
    0;
    2*BallValveSocket(ND_ChemPlu) - BallValveLength(ND_ChemPlu) - MaleAdapterLength(ND_ChemPlu) + SocketDepth(ND_ChemPlu)
] = [-0.1735; 1.60909; 4.91734] m
ChlorSedTrapElbow_Origin := ChlorDrainReducer_Origin + [0; L_SedTrapHorizPipe; 0]
ChlorSedTrapValveElbow_Origin := [
    ChlorSedTrapMTA2_Origin[0];
    ChlorSedTrapMTA2_Origin[1];
    ChlorSedTrapElbow_Origin[2] + ElbowRadius(ND_ChemPlu)
]
L_SedTrapToDrain := ChlorSedTrapValveElbow_Origin[0] - ChlorSedTrapElbow_Origin[0] - 2*ElbowRadius(ND_ChemPlu)
L_ChlorDrainPipeVert := ChlorDrainUnion_Origin[2] - ChlorDrainTee_Origin[2] + UnionSocketDepth(ND_ChemDrain) - UnionLength(ND_ChemDrain)/2
ChlorDrainElbow_Origin := [
    ChlorDrainTee_Origin[0];
    Tank_Origin[1] + OR_Fitting(ND_ChemDrain);
    ChlorDrainTee_Origin[2] - ShortTeeLength(ND_ChemDrain) - ElbowRadius(ND_ChemDrain)
]
ChlorLargeDrainHoriz_Origin := ChlorDrainElbow_Origin + [0; ElbowRadius(ND_ChemDrain); ElbowRadius(ND_ChemDrain)]
L_ChlorLargeDrainHoriz := ChlorDrainTee_Origin[1] - ChlorLargeDrainHoriz_Origin[1] - ShortTeeLength(ND_ChemDrain)
ChlorEtDrainElbow_Origin := [
    ChlorDrainElbow_Origin[0];
    -T_TankWall + Tank_Origin[1] - OR_Fitting(ND_ChemDrain) + ElbowRadius(ND_ChemDrain);
    FlowMeteringTank_Origin[2] - T_Et - CouplingLength(ND_EtDrain) - SocketDepth(ND_EtDrain) - ElbowRadius(ND_EtDrain)
]
ChlorEtDrainTee_Origin := [
    ChlorEtDrainElbow_Origin[0];
    Tank_Origin[1] + OR_Fitting(ND_ChemDrain);
    ChlorEtDrainElbow_Origin[2] + ShortTeeLength(ND_ChemDrain)
]
ChlorRoomDrainTee_Origin := [
    ChlorEtDrainElbow_Origin[0];
    ChlorEtDrainElbow_Origin[1] + ShortTeeLength(ND_ChemDrain) - ElbowRadius(ND_ChemDrain);
    Room_Origin[2]
]
ChlorLargeDrainLast_Origin := ChlorRoomDrainTee_Origin + [0; -ShortTeeLength(ND_ChemDrain); -ShortTeeLength(ND_ChemDrain)]
L_ChlorLargeDrainVertUp := ChlorDrainElbow_Origin[2] - ChlorEtDrainElbow_Origin[2] - ShortTeeLength(ND_ChemDrain) = 0.661677 m
L_ChlorLargeDrainVertLow := ChlorEtDrainElbow_Origin[2] - ChlorRoomDrainTee_Origin[2] - ShortTeeLength(ND_ChemDrain) - ElbowRadius(ND_ChemDrain) = 0.788642 m
L_ChlorLargeDrainLast := H_Wall + 2*T_TankWall
RoomDrainWedge_Origin := [ChlorRoomDrainTee_Origin[0] - OR(ND_ChemDrain); Room_Origin[1]; Room_Origin[2]]
RoomDrainWedge_Dim := [7 cm; OD(ND_ChemDrain); OR(ND_ChemDrain)]
L_RoomDrainPipe := T_TankWall - (ShortTeeLength(ND_ChemDrain) - OR_Fitting(ND_ChemDrain))
# drain bulkhead -- FTA -- Union -- MTA -- drain valve -- MTA -- tee with drain
# elbow - union - delivery tee - (space) - MTA - sediment valve - MTA - elbow - reducer - tee with drain - elbow - clamped to wall
# delivery tee - CHT tee - ^ air valve \/ barb -- CHT
# 1) facility drain
# 2) ledge integrated with drain on either side
# 3) ET with LFOM connected to bottom tank
# 1) manifold tubing
# 2) entrance tank w/connection to storage tank and cal column
# 3) lever arm details
# Storage Tank, Room and Details
TankLyr := layer_new("Tank", grey)
TankBox := Tank(Tank_Origin, [L_Wall; W_Wall; H_Wall], T_TankWall)
TankFrz := FreezeLayer("Tank")
TankScript := stack(TankLyr, TankBox, TankFrz)
RoomLyr := layer_new("Room", grey)
RoomBox := Tank(Room_Origin, [L_Wall; W_Wall; H_RoomTall], T_TankWall)
HatchLedge := BoxF([-(W_ChemPlatform*3/4); W_Wall - 1.05*OD_Fitting(ND_RMPipe) - S_Fitting; H_Wall] + Tank_Origin, [
    -(W_ChemPlatform*3/4) - 71.35 cm;
    W_Wall - 1.05*OD_Fitting(ND_RMPipe) - S_Fitting - S_Walkway;
    H_Wall + T_TankWall + S_Fitting
] + Tank_Origin, [0; 0; 0]*deg)
# make a drain ledge
# 22.75 in dia for 55 gal drum
RoomFrz := FreezeLayer("Room")
HatchLedgeCut := BoxF([-(W_ChemPlatform*3/4) - 10 cm; W_Wall - 1.05*OD_Fitting(ND_RMPipe) - 3*S_Fitting; H_Wall] + Tank_Origin, [
    -(W_ChemPlatform*3/4) - 61.35 cm;
    W_Wall - 1.05*OD_Fitting(ND_RMPipe) - S_Walkway + S_Fitting;
    H_Wall + T_TankWall + S_Fitting
] + Tank_Origin, [0; 0; 0]*deg)
WindowLower := BoxF([-zc - L_Wall - T_TankWall; W_Wall/2 - 0.25*W_Wall; H_RoomShort*0.5] + Room_Origin, [zc - L_Wall; W_Wall/2 + 0.25*W_Wall; H_RoomShort*0.5 + 75 cm] + Room_Origin, [0; 0; 0]*deg)
WindowUpper := BoxF([-zc; W_Wall/2 - 0.25*W_Wall; H_RoomTall*0.60] + Room_Origin, [zc + T_TankWall; W_Wall/2 + 0.25*W_Wall; H_RoomTall*0.60 + 75 cm] + Room_Origin, [0; 0; 0]*deg)
RoomSlope := WedgeF(Room_Origin + [-L_Wall - T_TankWall; W_Wall + T_TankWall; H_RoomTall], Room_Origin + [T_TankWall; -T_TankWall; H_RoomShort], [0; 0; 0]*deg)
SubtractAccessories := SubtractF(["Room"], "DeleteMe")
Room := stack(RoomLyr, RoomBox, HatchLedge, RoomFrz, HatchLedgeCut, WindowLower, WindowUpper, RoomSlope, GroupDelete, SubtractAccessories)
DoorLyr := layer_new("Door", red)
DoorBox := BoxSUBF([-W_ChemPlatform; W_Wall; H_Wall + T_TankWall + 6 cm] + Tank_Origin, [-W_ChemPlatform/2; T_TankWall + W_Wall; H_Wall + T_TankWall + 6.5 ft] + Tank_Origin, [0; 0; 0]*deg, ["Room"])
DoorFrz := FreezeLayer("Door")
Door := stack(DoorLyr, DoorBox, DoorFrz)
RoofLyr := layer_new("Roof", purple)
AN_Roof := atan((H_RoomTall - H_RoomShort)/(L_Wall + 2*T_TankWall))
L_RoofLong := 2*L_RoofOverhang + (H_RoomTall - H_RoomShort)/sin(AN_Roof)
RoofBox := BoxF(Tank_Origin + [
    T_TankWall + L_RoofOverhang*cos(AN_Roof);
    W_Wall + T_TankWall + L_RoofOverhang;
    H_RoomTall + H_Wall + T_TankWall + L_RoofOverhang*sin(AN_Roof)
], Tank_Origin + [
    T_TankWall + L_RoofOverhang*cos(AN_Roof) - L_RoofLong;
    -T_TankWall - L_RoofOverhang;
    H_RoomTall + H_Wall + T_TankWall + L_RoofOverhang*sin(AN_Roof) + zc
], [0; -AN_Roof; 0])
FrzRoof := FreezeLayer("Roof")
Roof := stack(RoofLyr, RoofBox, FrzRoof)
Facility := stack(Room, Door, Roof)
# Modular Stand
StandLyr := layer_new("Stand", red)
Stand_UpperPlatform := BoxF(Origin_UpperPlatform, Origin_UpperPlatform + [-L_ChemPlatform; W_ChemPlatform; T_MS], [0; 0; 0])
Stand_LowerPlatform := BoxF(Origin_LowerPlatform, Origin_LowerPlatform + [-L_ChemPlatform; W_ChemPlatform; T_MS], [0; 0; 0])
StandBottomRightLeg := BoxF(Origin_UpperPlatform, [Origin_UpperPlatform[0] - W_SquarePipe; Origin_UpperPlatform[1] + W_SquarePipe; Room_Origin[2]], [0; 0; 0])
ArrayStandLeg := ArrayLastGen(2, 2, -(-W_ChemPlatform + W_SquarePipe), -(L_ChemPlatform - W_SquarePipe))
StandFrz := FreezeLayer("Stand")
StandScript := stack(StandLyr, Stand_UpperPlatform, Stand_LowerPlatform, StandBottomRightLeg, ArrayStandLeg, StandFrz)
# Entrance Tank and Details
# Required entrance tank offset ensures that the drop tube does not bump into the stand
FlowMeteringTankLyr := layer_new("FlowMeteringTank", grey)
FlowMeteringTank := Tank(FlowMeteringTank_Origin, [L_EtMin; W_EtMin; H_Et], T_Et)
FlowMeteringTankFrz := FreezeLayer("FlowMeteringTank")
FlowMetering := stack(FlowMeteringTankLyr, FlowMeteringTank, FlowMeteringTankFrz)
LFOMmta_Origin := [
    -S_Fitting - OR_Fitting(ND_RMPipe);
    W_EtMin - (W_EtMin - 2*S_Fitting - OD_Fitting(ND_Transmission))/2;
    0
] + FlowMeteringTank_Origin
LFOMfta_Origin := [LFOMmta_Origin[0]; LFOMmta_Origin[1]; FlowMeteringTank_Origin[2] - T_Et - SocketDepth(ND_RMPipe)] = [-0.264294; 1.42916; 4.20241] m
LFOMTankCoupling_Origin := [LFOMmta_Origin[0]; LFOMmta_Origin[1]; Room_Origin[2] - SocketDepth(ND_RMPipe)]
LFOMBarb_Origin := LFOMfta_Origin + [-OR(ND_RMPipe); 0; -30 cm]
LFOMFitLyr := layer_new("LFOMFittings", green)
LFOMmta := MaleAdapterSUBF(LFOMmta_Origin, [0; 270]*deg, ND_RMPipe, PS_Fi, ["FlowMeteringTank"])
LFOMfta := CouplingF(LFOMfta_Origin, [0; 270]*deg, ND_RMPipe, PS_Fi)
LFOMCoupling := CouplingSUBF(LFOMTankCoupling_Origin, [0; 270]*deg, ND_RMPipe, PS_Fi, ["Room"])
LFOMBarb := TBarbF(LFOMBarb_Origin, [180; 0; 0]*deg, ND_ChemPlu, D_LargeChlorineTubes, PS_Fi)
LFOMFitLyrFrz := FreezeLayer("LFOMFittings")
LFOMFit := stack(LFOMFitLyr, LFOMmta, LFOMfta, LFOMCoupling, LFOMBarb, LFOMFitLyrFrz)
L_LFOMPipe := H_Et - H_Freeboard
L_LFOMtoTank := LFOMfta_Origin[2] - LFOMTankCoupling_Origin[2] - (CouplingLength(ND_RMPipe) - 2*SocketDepth(ND_RMPipe))
L_LFOMthroughWall := T_TankWall - CouplingLength(ND_RMPipe) + SocketDepth(ND_RMPipe)
LFOMthroughWall_Origin := LFOMTankCoupling_Origin + [0; 0; 2*SocketDepth(ND_RMPipe) - CouplingLength(ND_RMPipe)]
LFOMPipeLyr := layer_new("LFOMPlu", blue)
LFOMPipe := PipeF(LFOMmta_Origin, L_LFOMPipe, [0; 90]*deg, ND_RMPipe, PS_Fi)
LFOMPluFrz := FreezeLayer("LFOMPlu")
# subtracting HL.EtOverflow is like adding freeboard more than anything since it's unlikely that the weir would be draining anything other than very small amounts
LFOMorifices :=
    Local ← stack(LFOMPipeLyr, LFOMPipe, LFOMPluFrz)
    for h ∈ 0 .. last(H_LfomOrifices)
        if N_LfomOrifices[h] ≠ 0
            Local ← stack(Local, CylinderF([
                LFOMmta_Origin[0];
                LFOMmta_Origin[1];
                FlowMeteringTank_Origin[2] + H_Et - H_Freeboard + H_LfomOrifices[h] - HL_Lfom - HL_EtOverflow
            ], D_LfomOrifices/2, OR(ND_RMPipe) + zc, [
                (asin(0.5*S_LfomOrificesMin/OD(ND_RMPipe)) + asin(D_LfomOrifices/OD(ND_RMPipe)))*(mod(h, 2) == 0);
                0 deg
            ]))
        if N_LfomOrifices[h] > 1
            Local ← stack(Local, ArrayLastPolar([
                LFOMmta_Origin[0];
                LFOMmta_Origin[1];
                FlowMeteringTank_Origin[2] + H_Et - H_Freeboard - HL_Lfom - HL_EtOverflow + H_LfomOrifices[h]
            ], N_LfomOrifices[h], (N_LfomOrifices[h] - 1)*(2*asin(D_LfomOrifices/OD(ND_RMPipe)) + 2*asin(S_LfomOrificesMin/OD(ND_RMPipe)))))
    return Local
SubtractLFOMorifices := SubtractF(["LFOMPlu"], "DeleteMe")
LFOMPipeThaw := SelectLayer("LFOMPlu")
LFOMtoTank := PipeF(LFOMTankCoupling_Origin, L_LFOMtoTank, [0; 90]*deg, ND_RMPipe, PS_Fi)
LFOMthroughWall := PipeSUBF(LFOMthroughWall_Origin, L_LFOMthroughWall, [0; 270]*deg, ND_RMPipe, PS_Fi, ["Room"])
LFOMPipes := stack(LFOMorifices, GroupDelete, SubtractLFOMorifices, LFOMPipeThaw, LFOMtoTank, LFOMthroughWall, LFOMPluFrz)
LFOMPlu := stack(LFOMFit, LFOMPipes)
EtDrainMTA_Origin := [-L_EtMin + S_Fitting + OR(ND_EtDrain); -(S_Fitting + OR(ND_EtDrain)) + W_EtMin; 0] + FlowMeteringTank_Origin
EtDrainFTA_Origin := [
    EtDrainMTA_Origin[0];
    EtDrainMTA_Origin[1];
    FlowMeteringTank_Origin[2] - T_Et - SocketDepth(ND_EtDrain)
]
EtDrainElbow1_Origin := EtDrainFTA_Origin + [0; 0; -CouplingLength(ND_EtDrain)]
EtDrainElbow2_Origin := [
    ChlorTank_Origin[0];
    -ElbowRadius(ND_EtDrain) + EtDrainElbow1_Origin[1];
    -ElbowRadius(ND_EtDrain) + EtDrainElbow1_Origin[2]
]
EtDrainFittingLyr := layer_new("EtDrainFittings", green)
EtDrainMTA := MaleAdapterSUBF(EtDrainMTA_Origin, [0; 270; 0]*deg, ND_EtDrain, PS_Fi, ["FlowMeteringTank"])
EtDrainFTA := CouplingF(EtDrainFTA_Origin, [0; 270; 0]*deg, ND_EtDrain, PS_Fi)
EtDrainElbow1 := ElbowF(EtDrainElbow1_Origin, [180; 0; 90]*deg, ND_EtDrain, PS_Fi)
EtDrainElbow2 := ElbowF(EtDrainElbow2_Origin, [0; 0; 0]*deg, ND_EtDrain, PS_Fi)
EtDrainFitFrz := FreezeLayer("EtDrainFittings")
EtDrainFit := stack(EtDrainFittingLyr, EtDrainMTA, EtDrainFTA, EtDrainElbow1, EtDrainElbow2, EtDrainFitFrz)
EtDrainPipesLyr := layer_new("EtDrainPipes", blue)
L_EtOverflowPipe := H_Et - H_Freeboard - HL_EtOverflow
L_EtXPipe := EtDrainElbow2_Origin[0] - EtDrainElbow1_Origin[0] - 2*ElbowRadius(ND_EtDrain)
EtOverflowPipe := PipeF(EtDrainMTA_Origin, L_EtOverflowPipe, [0; 90; 0]*deg, ND_EtDrain, PS_Fi)
EtXPipe := PipeF(EtDrainElbow2_Origin + [-ElbowRadius(ND_EtDrain); ElbowRadius(ND_EtDrain); 0], L_EtXPipe, [0; 0; 0]*deg, ND_EtDrain, PS_Fi)
EtDrainPipesFrz := FreezeLayer("EtDrainPipes")
EtDrainPipes := stack(EtDrainPipesLyr, EtOverflowPipe, EtXPipe, EtDrainPipesFrz)
EtDrainPlumbing := stack(EtDrainFit, EtDrainPipes)
RawWaterInletCoupling_Origin := [
    Room_Origin[0] + CouplingLength(ND_Transmission) - SocketDepth(ND_Transmission);
    FlowMeteringTank_Origin[1] + S_Fitting + OR_Fitting(ND_Transmission);
    FlowMeteringTank_Origin[2] + H_Et + S_Fitting + OD(ND_Transmission)
]
RawWaterInletElbow_Origin := [
    FlowMeteringTank_Origin[0] - S_Fitting - OR_Fitting(ND_Transmission) + ElbowRadius(ND_Transmission);
    RawWaterInletCoupling_Origin[1];
    RawWaterInletCoupling_Origin[2]
]
RawWaterInletNipple_Origin := [SocketDepth(ND_Transmission) - CouplingLength(ND_Transmission); 0; 0] + RawWaterInletCoupling_Origin
RawWaterInletPipeVert_Origin := [-ElbowRadius(ND_Transmission); 0; -ElbowRadius(ND_Transmission)] + RawWaterInletElbow_Origin
L_RawWaterInletNipple := RawWaterInletNipple_Origin[0] - RawWaterInletElbow_Origin[0]
RawWaterInletFitLyr := layer_new("RawWaterInletFitPlu", green)
RawWaterInletCoupling := CouplingSUBF(RawWaterInletCoupling_Origin, [0; 0]*deg, ND_Transmission, PS_Fi, ["Room"])
RawWaterInletElbow := ElbowF(RawWaterInletElbow_Origin, [90; 0; 90]*deg, ND_Transmission, PS_Fi)
RawWaterInletFitFrz := FreezeLayer("RawWaterInletFitPlu")
RawWaterInletFit := stack(RawWaterInletFitLyr, RawWaterInletCoupling, RawWaterInletElbow, RawWaterInletFitFrz)
RawWaterInletPipeLyr := layer_new("RawWaterInletPlu", blue)
L_RawWaterInletPipe := T_TankWall*2
L_RawWaterInletPipeVert := RawWaterInletPipeVert_Origin[2] - FlowMeteringTank_Origin[2] - H_Et/3
RawWaterInletPipe := PipeSUBF(RawWaterInletCoupling_Origin + [L_RawWaterInletPipe; 0; 0], L_RawWaterInletPipe, [0; 0]*deg, ND_Transmission, PS_Fi, ["Room"])
RawWaterInletNipple := PipeF(RawWaterInletNipple_Origin, L_RawWaterInletNipple, [0; 0]*deg, ND_Transmission, PS_Fi)
RawWaterInletVert := PipeF(RawWaterInletPipeVert_Origin, L_RawWaterInletPipeVert, [0; 270]*deg, ND_Transmission, PS_Fi)
RawWaterInletPipeFrz := FreezeLayer("RawWaterInletPlu")
RawWaterInletPipes := stack(RawWaterInletPipeLyr, RawWaterInletPipe, RawWaterInletNipple, RawWaterInletVert, RawWaterInletPipeFrz)
RawWaterInlet := stack(RawWaterInletFit, RawWaterInletPipes)
EntranceDetails := stack(FlowMetering, RawWaterInlet, LFOMPlu, EtDrainPlumbing)
# Chemical Doser
LA_Origin := [
    FlowMeteringTank_Origin[0] - L_Et - T_Et;
    FlowMeteringTank_Origin[1] + W_Et - ConRadius(ND_EtFloat) - S_Fitting;
    FlowMeteringTank_Origin[2] + H_Et + D_LABOrigintoLAOriginZ
]
LADtFitting_Origin := [
    LA_Origin[0] + L_CdcLever - L_LAOriginToDtY + innerdiameter(ND_DropTube, PS_Modules)/2 - .02 in;
    LA_Origin[1] + 1/8*in + L_LAOriginToDtCenterX;
    L_LAOriginToDtZ + LA_Origin[2]
]
LAReducerFitting_Origin := [-L_LAOriginToReducerY - T_CdcReducer + L_CdcLever/2; L_LAOriginToReducerX; L_LAOriginToDtZ] + LA_Origin
LADt_Center := [
    LA_Origin[0] + L_CdcLever - L_LAOriginToDtY;
    LA_Origin[1] + L_LAOriginToDtCenterX;
    LA_Origin[2] + L_LAOriginToDtZ + H_LeverArm
]
LAReducer_Center := LA_Origin + [-L_LAOriginToReducerCenterY; L_LAOriginToReducerCenterX; L_LAOriginToDtZ]
CdcSliderLyr := layer_new("CdcSlider", grey)
Slider := BoxF([LADt_Center[0] - 1 in; LADt_Center[1] - outerradius(ND_DropTube); LA_Origin[2] - 1/4*in], [
    LADt_Center[0] + 1 in;
    LADt_Center[1] - outerradius(ND_DropTube) - 3/4*in;
    LA_Origin[2] + H_LeverArm - 1/4*in
], [0; 0; 0]*deg)
CdcSliderFrz := FreezeLayer("CdcSlider")
LArmSubBox := BoxF([LADt_Center[0] - 0.2 in; LA_Origin[1] + 1/8*in; LA_Origin[2]], [LADt_Center[0] + 0.2 in; LA_Origin[1]; LA_Origin[2] + H_LeverArm], [0; 0; 0]*deg)
SubtractLArm := SubtractF(["CdcSlider"], "DeleteMe")
CdcSlider := stack(CdcSliderLyr, Slider, CdcSliderFrz, LArmSubBox, GroupDelete, SubtractLArm)
W_Bracket := 2 in
CdcBracketLyr := layer_new("CdcBracket", ltgrey)
Bracket := BoxF([LA_Origin[0]; LA_Origin[1] + 1 in; FlowMeteringTank_Origin[2] + H_Et], [LA_Origin[0] + 0.25 in; LA_Origin[1] - 1 in; LA_Origin[2] + H_LeverArm], [0; 0; 0]*deg)
CdcBracketFrz := FreezeLayer("CdcBracket")
CdcBracket := stack(CdcBracketLyr, Bracket, CdcBracketFrz)
CdcLayer := layer_new("CdcLayer", ltgrey)
LArm := BoxF([LA_Origin[0] - L_CdcLever - 1/2*in; LA_Origin[1] + 1/8*in; LA_Origin[2]], [LA_Origin[0] + L_CdcLever + 1/2*in; LA_Origin[1] - 1/8*in; LA_Origin[2] + H_LeverArm], [0; 0; 0]*deg)
LArmBar := CylinderSUBF([LA_Origin[0]; LA_Origin[1] + 1.1 in; LA_Origin[2] + H_LeverArm/2], R_LArmBar, 2.2 in, [90; 0]*deg, ["CdcLayer"])
DropTube1 := PipeF(LADt_Center, 35 cm, [0; -90]*deg, ND_DropTube, PS_Modules)
InsertCht := insertdwg("https://confluence.cornell.edu/download/attachments/173604905/CdcCht.dwg", CHT_Origin, 1, 1, 90 deg)
FreezeCdcLayer := FreezeLayer("CdcLayer")
CdcFloatLyr := layer_new("CdcFloat", yellow)
L_CdcFloat := LA_Origin[2] - (FlowMeteringTank_Origin[2] + H_Et - H_Freeboard - HL_Lfom + CapHeight(ND_EtFloat))
FloatCable := CylinderF([
    LA_Origin[0] + L_CdcLever;
    LA_Origin[1];
    FlowMeteringTank_Origin[2] + H_Et - H_Freeboard - HL_Lfom + CapHeight(ND_EtFloat)
], D_Cable, L_CdcFloat, [0; 90]*deg)
CdcFloatCapTop := CapF([
    LA_Origin[0] + L_CdcLever;
    LA_Origin[1];
    FlowMeteringTank_Origin[2] + H_Et - H_Freeboard - HL_Lfom + CapHeight(ND_EtFloat) - CapThickness(ND_EtFloat)
], [0; -90]*deg, ND_EtFloat)
CdcFloatCapBottom := CapF([
    LA_Origin[0] + L_CdcLever;
    LA_Origin[1];
    FlowMeteringTank_Origin[2] + H_Et - H_Freeboard - HL_Lfom - CapHeight(ND_EtFloat) + CapThickness(ND_EtFloat)
], [0; 90]*deg, ND_EtFloat)
CdcFloatPipe := PipeF([
    LA_Origin[0] + L_CdcLever;
    LA_Origin[1];
    FlowMeteringTank_Origin[2] + H_Et - H_Freeboard - HL_Lfom + CapHeight(ND_EtFloat) - CapThickness(ND_EtFloat)
], 2*CapHeight(ND_EtFloat) - 2*CapThickness(ND_EtFloat), [0; -90]*deg, ND_EtFloat, PS_Default)
CdcFloatFrz := FreezeLayer("CdcFloat")
CdcFloat := stack(CdcFloatLyr, FloatCable, CdcFloatCapTop, CdcFloatCapBottom, CdcFloatPipe, CdcFloatFrz)
ChemDoser := stack(CdcSlider, CdcBracket, CdcLayer, LArm, LArmBar, DropTube1, FreezeCdcLayer, CdcFloat)
# Chemical Tank
# Constant Head Tank
ND_CHT := 3 in
H_CHTFreeboard := 2 cm
H_InletToOutlet := 4 cm
L_CHTClearPipe := H_InletToOutlet + S_Fitting + H_CHTFreeboard
L_CHTSlider := L_CHTClearPipe*2.2
CHTPipe_Origin := [
    Origin_LowerPlatform[0] - W_SquarePipe/2;
    Origin_LowerPlatform[1] + W_ChemPlatform + OR_Fitting(ND_CHT) + 2*OR(ND_ChemPlu);
    Z_LeverArmFulcrum + H_CHTFreeboard
]
CHTInletBarb_Origin := CHTPipe_Origin + [-OR(ND_CHT); 0; -H_CHTFreeboard]
CHTFloatValve_Origin := CHTPipe_Origin + [-IR(ND_CHT, PS_Fi); 0; -H_CHTFreeboard]
CHTOutletBarb_Origin := CHTInletBarb_Origin + [OR(ND_CHT) - OR_Fitting(ND_CHT); 0; -H_InletToOutlet]
CHTSlider_Origin := [0; -OR(ND_ChemPlu) - OR_Fitting(ND_CHT); -0.5*L_CHTClearPipe + 0.5*L_CHTSlider] + CHTPipe_Origin
CHTCap_Origin := [0; 0; -L_CHTClearPipe] + CHTPipe_Origin
CHTfta_Origin := CHTCap_Origin + [0; 0; -BulkheadThreadLength(ND_ChemPlu)]
CHTmta_Origin := CHTfta_Origin + [0; 0; -CouplingLength(ND_ChemPlu)]
CHTDrainValve_Origin := CHTmta_Origin + [
    0;
    0;
    -(MaleAdapterLength(ND_ChemPlu) - SocketDepth(ND_ChemPlu)) - BallValveLength(ND_ChemPlu) + 2*BallValveSocket(ND_ChemPlu)
]
CHTClearPipeLyr := layer_new("CHTClearPipe", blue)
CHTClearPipe := PipeF(CHTPipe_Origin, L_CHTClearPipe, [0; 270; 0]*deg, ND_CHT, PS_Fi)
CHTClearPipeFrz := FreezeLayer("CHTClearPipe")
CHTSliderLyr := layer_new("CHTSlider", blue)
CHTSlider := PipeF(CHTSlider_Origin, L_CHTSlider, [0; 270; 0]*deg, ND_ChemPlu, PS_Fi)
CHTSliderFrz := FreezeLayer("CHTSlider")
CHTCapLyr := layer_new("CHTCap", green)
CHTCap := CapF(CHTCap_Origin, [0; 90; 0]*deg, ND_CHT)
CHTCapFrz := FreezeLayer("CHTCap")
# need to look from back to insert bulkhead
CHTFittingsLyr := layer_new("CHTFittings", green)
CHTInletBarb := TBarbF(CHTInletBarb_Origin, [180; 0; 0]*deg, D_LargeChlorineTubes, D_LargeChlorineTubes, PS_Fi)
CHTFloatValveInsert := InsertDwg(FloatValveDwg, CHTFloatValve_Origin, ND_ChemPlu, 180 deg)
CHTOutletBarb := TBarbF(CHTOutletBarb_Origin, [180; 0; 0]*deg, D_LargeChlorineTubes, D_LargeChlorineTubes, PS_Fi)
CHTDrainFTA := CouplingF(CHTfta_Origin, [0; 270; 0]*deg, ND_ChemPlu, PS_Fi)
CHTDrainMTA := MaleAdapterF(CHTmta_Origin, [0; 270; 0]*deg, ND_ChemPlu, PS_Fi)
CHTDrainBulkhead := InsertDwg(BulkheadDwg, [-CHTCap_Origin[0]; CHTCap_Origin[2]; CHTCap_Origin[1]], ND_ChemPlu, 270 deg)
CHTDrainValve := InsertDwg(BallValveDwg, [-CHTDrainValve_Origin[0]; CHTDrainValve_Origin[2]; CHTDrainValve_Origin[1]], ND_ChemPlu, 270 deg)
CHTFittingsFrz := FreezeLayer("CHTFittings")
CHTScript := stack(CHTClearPipeLyr, CHTClearPipe, CHTClearPipeFrz, CHTCapLyr, CHTCap, CHTCapFrz, CHTSliderLyr, CHTSlider, CHTSliderFrz, CHTFittingsLyr, CHTInletBarb, CHTFloatValveInsert, CHTDrainFTA, CHTDrainMTA, CHTOutletBarb, view("ba"), CHTDrainBulkhead, CHTDrainValve, view("t"), CHTFittingsFrz)
# Chlorine Drum
ChemTankLyr := layer_new("ChemicalTank", yellow)
ChlorTank := CylinderF(ChlorTank_Origin, 0.5*D_ChlorineTank + T_ChemTankWall, H_ChlorineTank + T_ChemTankWall, [0; 90]*deg)
ChemTankFrz := FreezeLayer("ChemicalTank")
ChlorineTankInner := CylinderF(ChlorTank_Origin + [0; 0; T_ChemTankWall], D_ChlorineTank/2, H_ChlorineTank, [0; 90]*deg)
HollowTanks := SubtractF(["ChemicalTank"], "DeleteMe")
ChemTanksScript := stack(ChemTankLyr, ChlorTank, ChemTankFrz, ChlorineTankInner, GroupDelete, HollowTanks)
# Draw the chlorine tank plumbing
# all half inch fittings in this layer
LayerChlorPieces := layer_new("ChlorDrumFittingsPlu", green)
ChlorBulkheadFitting := InsertDwg(BulkheadDwg, ChlorOutlet_Origin, ND_ChemPlu, 90 deg)
ChlorDeliveryFTA1 := CouplingF(ChlorDeliveryFTA1_Origin, [270; 0; 0]*deg, ND_ChemPlu, PS_Fi)
ChlorDeliveryMTA1 := MaleAdapterF(ChlorDeliveryMTA1_Origin, [270; 0; 0]*deg, ND_ChemPlu, PS_Fi)
ChlorDeliveryValve := InsertDwg(BallValveDwg, ChlorDeliveryValve_Origin, ND_ChemPlu, 270 deg)
ChlorDeliveryMTA2 := MaleAdapterF(ChlorDeliveryMTA2_Origin, [90; 0; 0]*deg, ND_ChemPlu, PS_Fi)
ChlorDeliveryElbow := ElbowF(ChlorDeliveryElbow_Origin, [0; 270; 0]*deg, ND_ChemPlu, PS_Fi)
ChlorDeliveryUnion := UnionF(ChlorDeliveryUnion_Origin, [0; 90; 0]*deg, ND_ChemPlu, PS_Fi)
ChlorDeliveryElbow1 := ElbowF(ChlorDeliveryElbow1_Origin, [90; 0; 270]*deg, ND_ChemPlu, PS_Fi)
ChlorDeliveryTee2 := TeeF(ChlorDeliveryTee2_Origin, [90; 0; 90]*deg, ND_ChemPlu, PS_Fi)
ChlorSedTrapTee := TeeF(ChlorSedTrapTee_Origin, [0; 0; 270]*deg, ND_ChemPlu, PS_Fi)
ChlorDeliveryFTA2 := CouplingF(ChlorDeliveryFTA2_Origin, [0; 270]*deg, ND_ChemPlu, PS_Fi)
ChlorCHTBarb := TBarbF(ChlorCHTBarb_Origin, [0; 90; 0]*deg, ND_ChemPlu, D_LargeChlorineTubes, PS_Fi)
ChlorAirReleaseValve := InsertDwg(BallValveDwg, [-ChlorAirReleaseValve_Origin[0]; ChlorAirReleaseValve_Origin[2]; ChlorAirReleaseValve_Origin[1]], ND_ChemPlu, 270 deg)
ChlorSedTrapMTA1 := MaleAdapterF(ChlorSedTrapMTA1_Origin, [0; 270; 0]*deg, ND_ChemPlu, PS_Fi)
ChlorDeliveryDrainValve := InsertDwg(BallValveDwg, [
    -ChlorDeliveryDrainValve_Origin[0];
    ChlorDeliveryDrainValve_Origin[2];
    ChlorDeliveryDrainValve_Origin[1]
], ND_ChemPlu, 90 deg)
ChlorSedTrapMTA2 := MaleAdapterF(ChlorSedTrapMTA2_Origin, [0; 90; 0]*deg, ND_ChemPlu, PS_Fi)
ChlorSedTrapElbow := ElbowF(ChlorSedTrapElbow_Origin, [0; 180; 0]*deg, ND_ChemPlu, PS_Fi)
ChlorSedTrapValveElbow := ElbowF(ChlorSedTrapValveElbow_Origin, [0; 0; 270]*deg, ND_ChemPlu, PS_Fi)
LayerChlorPiecesFrz := FreezeLayer("ChlorDrumFittingsPlu")
# all half in fittings stacked here
ChlorDeliveryFittings := stack(LayerChlorPieces, ChlorBulkheadFitting, ChlorCHTBarb, view("ba"), ChlorAirReleaseValve, ChlorDeliveryDrainValve, view("t"), ChlorDeliveryFTA1, ChlorDeliveryMTA1, ChlorDeliveryValve, ChlorDeliveryMTA2, ChlorDeliveryElbow, ChlorDeliveryUnion, ChlorDeliveryElbow1, ChlorDeliveryTee2, ChlorSedTrapTee, ChlorDeliveryFTA2, ChlorSedTrapMTA1, ChlorSedTrapMTA2, ChlorSedTrapElbow, ChlorSedTrapValveElbow, LayerChlorPiecesFrz)
ChlorDrainReducerLyr := layer_new("ChlorDrainReducer", green)
ChlorDrainReducer := reducerF(ChlorDrainReducer_Origin, [270; 0; 0]*deg, ND_ChemDrain, ND_ChemPlu, ReducerLengthDrain, PS_Fi)
ChlorDrainReducerFrz := FreezeLayer("ChlorDrainReducer")
# reducer and 1.5" fittings in this layer
ChlorDrainFittingsLayer := layer_new("ChlorDrumDrainFittings", green)
ChlorDrainBulkhead := InsertDwg(BulkheadDwg, [ChlorDrainBulkhead_Origin[0]; ChlorDrainBulkhead_Origin[2]; (-ChlorDrainBulkhead_Origin)[1]], ND_ChemDrain, 270 deg)
# switch this to front view
ChlorDrainMTA := CouplingF(ChlorDrainMTA_Origin, [0; 270]*deg, ND_ChemDrain, PS_Fi)
ChlorDrainUnion := UnionF(ChlorDrainUnion_Origin, [0; 90]*deg, ND_ChemDrain, PS_Fi)
ChlorDrainTee := TeeF(ChlorDrainTee_Origin, [90; 90; 0]*deg, ND_ChemDrain, PS_Fi)
ChlorDrainElbow := ElbowF(ChlorDrainElbow_Origin, [270; 270; 0]*deg, ND_ChemDrain, PS_Fi)
ChlorEtDrainElbow := ElbowSUBF(ChlorEtDrainElbow_Origin, [180; 90; 0]*deg, ND_ChemDrain, PS_Fi, ["Room"])
ChlorEtDrainTee := TeeSUBF(ChlorEtDrainTee_Origin, [90; 90; 0]*deg, ND_ChemDrain, PS_Fi, ["Room"])
ChlorRoomDrainTee := TeeSUBF(ChlorRoomDrainTee_Origin, [0; 90; 0]*deg, ND_ChemDrain, PS_Fi, ["Room"])
ChlorDrainFittingsFrz := FreezeLayer("ChlorDrumDrainFittings")
ChlorDrainFittings := stack(ChlorDrainReducerLyr, ChlorDrainReducer, ChlorDrainReducerFrz, ChlorDrainFittingsLayer, view("f"), ChlorDrainBulkhead, view("t"), ChlorDrainMTA, ChlorDrainUnion, ChlorDrainReducer, ChlorEtDrainElbow, ChlorEtDrainTee, ChlorDrainTee, ChlorDrainElbow, ChlorRoomDrainTee, ChlorDrainFittingsFrz)
LayerChlorPiping := layer_new("ChlorPipingPlu", blue)  # includes all piping (both 0.5" and 1.5")
ChlorAirReleasePipe := PipeF(ChlorAirReleasePipe_Origin, L_ChlorAirRelease, [0; 90]*deg, ND_ChemPlu, PS_Fi)
ChlorSedTrapPipe := PipeF(ChlorSedTrapPipe_Origin, L_SedTrapPipe, [0; 270]*deg, ND_ChemPlu, PS_Fi)
ChlorSedTrapHorizPipe := PipeF(ChlorSedTrapElbow_Origin, L_SedTrapHorizPipe, [90; 0]*deg, ND_ChemPlu, PS_Fi)
ChlorDrainPipeVert := PipeF(ChlorDrainTee_Origin, L_ChlorDrainPipeVert, [0; 90]*deg, ND_ChemDrain, PS_Fi)
ChlorLargeDrainHoriz := PipeSUBF(ChlorLargeDrainHoriz_Origin, L_ChlorLargeDrainHoriz, [270; 0]*deg, ND_ChemDrain, PS_Fi, ["Room"])
ChlorLargeDrainVertUp := PipeF(ChlorDrainElbow_Origin, L_ChlorLargeDrainVertUp, [0; 270]*deg, ND_ChemDrain, PS_Fi)
ChlorLargeDrainVertLow := PipeF(ChlorEtDrainElbow_Origin + [0; -ElbowRadius(ND_ChemDrain); -ElbowRadius(ND_ChemDrain)], L_ChlorLargeDrainVertLow, [0; 270]*deg, ND_ChemDrain, PS_Fi)
ChlorRoomDrain := PipeSUBF(ChlorRoomDrainTee_Origin, L_RoomDrainPipe, [270; 90]*deg, ND_ChemDrain, PS_Fi, ["Room"])
ChlorOuterDrainLast := PipeF(ChlorLargeDrainLast_Origin, L_ChlorLargeDrainLast, [0; 270]*deg, ND_ChemDrain, PS_Fi)
L_EtDrainThroughWall := ChlorEtDrainTee_Origin[1] - ChlorEtDrainElbow_Origin[1] - ShortTeeLength(ND_ChemDrain)
EtDrainThroughWall := PipeSUBF(ChlorEtDrainElbow_Origin, L_EtDrainThroughWall, [270; 0]*deg, ND_ChemDrain, PS_Fi, ["Room"])
L_EtDrainHoriz := EtDrainElbow2_Origin[1] - ChlorEtDrainTee_Origin[1] - ShortTeeLength(ND_ChemDrain) = 1.33716 m
EtDrainHoriz := PipeF(EtDrainElbow2_Origin, L_EtDrainHoriz, [90; 0]*deg, ND_ChemDrain, PS_Fi)
SedTrapToDrainPipe := PipeF(ChlorSedTrapValveElbow_Origin + [-ElbowRadius(ND_ChemPlu); 0; -ElbowRadius(ND_ChemPlu)], L_SedTrapToDrain, [0; 0]*deg, ND_ChemPlu, PS_Fi)
DeliveryPipeHoriz := PipeF(ChlorDeliveryElbow1_Origin + [L_DeliveryPipeHoriz; 0; 0], L_DeliveryPipeHoriz, [0; 0]*deg, ND_ChemPlu, PS_Fi)
LayerChlorPipingFrz := FreezeLayer("ChlorPipingPlu")
ChlorDeliveryPlu := stack(LayerChlorPiping, ChlorAirReleasePipe, ChlorSedTrapPipe, ChlorSedTrapHorizPipe, ChlorDrainPipeVert, DeliveryPipeHoriz, ChlorLargeDrainHoriz, SedTrapToDrainPipe, ChlorLargeDrainVertUp, ChlorLargeDrainVertLow, ChlorRoomDrain, ChlorOuterDrainLast, EtDrainThroughWall, EtDrainHoriz, LayerChlorPipingFrz)
RoomDrainWedge := WedgeF(RoomDrainWedge_Origin, RoomDrainWedge_Origin + RoomDrainWedge_Dim, [90; 180; 0]*deg)
SubtractWedge := SubtractF(["Room"], "DeleteMe")
ChlorPlu := stack(ChlorDeliveryFittings, ChlorDrainFittings, ChlorDeliveryPlu, RoomDrainWedge, GroupDelete, SubtractWedge)
# Manifolds
ManifoldInletTee_Origin := [
    -ShortTeeLength(ND_ChemPlu) - W_SquarePipe/2 + Origin_LowerPlatform[0];
    W_ChemPlatform + OR_Fitting(ND_ChemPlu) + Origin_LowerPlatform[1];
    CHTDrainValve_Origin[2] - S_Fitting - BallValveLength(ND_ChemPlu) - MaleAdapterLength(ND_ChemPlu) - SocketDepth(ND_ChemPlu) - ShortTeeLength(ND_ChemPlu)
]
ManifoldInletBarb_Origin := ManifoldInletTee_Origin + [-SocketDepth(ND_ChemPlu); 0; 0]
ManifoldAirReleaseMTA_Origin := ManifoldInletTee_Origin + [ShortTeeLength(ND_ChemPlu); 0; ShortTeeLength(ND_ChemPlu) + 2*SocketDepth(ND_ChemPlu)]
ManifoldInletFTA_Origin := ManifoldAirReleaseMTA_Origin + [0; 0; -TeeLength(ND_ChemPlu) - CouplingLength(ND_ChemPlu) - 2*SocketDepth(ND_ChemPlu)]
ManifoldBarbUpper_Origin := ManifoldInletFTA_Origin + [0; 0; -SocketDepth(ND_ChemPlu)] = [-0.11; 1.5879; 4.29111] m
ManifoldAirReleaseValve_Origin := ManifoldAirReleaseMTA_Origin + [0; 0; SocketDepth(ND_ChemPlu) - BallValveSocket(ND_ChemPlu) + BallValveLength(ND_ChemPlu)/2]
L_ChlorineTube = 0.8 m
ManifoldBarbLower_Origin := ManifoldBarbUpper_Origin + [0; 0; -L_ChlorineTube]
ManifoldFTA2_Origin := ManifoldBarbLower_Origin + [0; 0; -SocketDepth(ND_ChemPlu)]
ManifoldTee2_Origin := ManifoldFTA2_Origin + [-ShortTeeLength(ND_ChemPlu); 0; -CouplingLength(ND_ChemPlu) - ShortTeeLength(ND_ChemPlu)]
ManifoldVinegarTrapMTAR_Origin := ManifoldTee2_Origin + [-2*SocketDepth(ND_ChemPlu); 0; 0]
VinegarTrapValveLower_Origin := ManifoldVinegarTrapMTAR_Origin + [-SocketDepth(ND_ChemPlu) - BallValveLength(ND_ChemPlu)/2 + BallValveSocket(ND_ChemPlu); 0; 0]
ManifoldVinegarTrapMTAL_Origin := VinegarTrapValveLower_Origin + [-BallValveLength(ND_ChemPlu) + BallValveSocket(ND_ChemPlu) - SocketDepth(ND_ChemPlu); 0; 0]
ManifoldDrainMTA_Origin := ManifoldTee2_Origin + [ShortTeeLength(ND_ChemPlu); 0; -ShortTeeLength(ND_ChemPlu) - 2*SocketDepth(ND_ChemPlu)]
ManifoldDrainValve_Origin := ManifoldDrainMTA_Origin + [0; 0; -SocketDepth(ND_ChemPlu) + BallValveSocket(ND_ChemPlu) - BallValveLength(ND_ChemPlu)/2]
ManifoldElbow_Origin := [
    Origin_LowerPlatform[0] - L_ChemPlatform + ElbowRadius(ND_ChemPlu) + W_SquarePipe/2;
    ManifoldTee2_Origin[1];
    ManifoldTee2_Origin[2]
]
ManifoldTee3_Origin := [
    ManifoldElbow_Origin[0] + ShortTeeLength(ND_ChemPlu) - ElbowRadius(ND_ChemPlu);
    ManifoldInletTee_Origin[1];
    ManifoldInletTee_Origin[2]
]
ManifoldBarbToDropTube_Origin := ManifoldTee3_Origin + [SocketDepth(ND_ChemPlu); 0; 0]
ManifoldMTA3_Origin := [-ShortTeeLength(ND_ChemPlu); 0; -ShortTeeLength(ND_ChemPlu) - 2*SocketDepth(ND_ChemPlu)] + ManifoldTee3_Origin = [-1.4838; 1.5879; 4.32094] m
ManifoldMTA4_Origin := ManifoldTee3_Origin + [-ShortTeeLength(ND_ChemPlu); 0; ShortTeeLength(ND_ChemPlu) + SocketDepth(ND_ChemPlu)]
ManifoldVinegarValve_Origin := ManifoldMTA3_Origin + [0; 0; -SocketDepth(ND_ChemPlu) + BallValveSocket(ND_ChemPlu) - BallValveLength(ND_ChemPlu)/2]
ManifoldVinegarMTA_Origin := ManifoldVinegarValve_Origin + [0; 0; -BallValveLength(ND_ChemPlu) + BallValveSocket(ND_ChemPlu) - SocketDepth(ND_ChemPlu)]
ManifoldAirReleaseValve2_Origin := ManifoldMTA4_Origin + [0; 0; SocketDepth(ND_ChemPlu) + 0.5*BallValveLength(ND_ChemPlu) - BallValveSocket(ND_ChemPlu)]
ManifoldTube_Origin := ManifoldBarbUpper_Origin + [
    0;
    0;
    -0.25*TBarbBLength(D_ChlorineTube) - (TBarbLength(ND_ChemPlu, D_ChlorineTube) - TBarbBLength(D_ChlorineTube) - TBarbTLength(ND_ChemPlu))
]
ChlorManifoldLayer := layer_new("ChlorManifoldFittings", green)
ManifoldInletTee := TeeF(ManifoldInletTee_Origin, [90; 0; 90]*deg, ND_ChemPlu, PS_Fi)
ManifoldInletBarb := TBarbF(ManifoldInletBarb_Origin, [180; 0; 0]*deg, ND_ChemPlu, D_LargeChlorineTubes, PS_Fi)
ManifoldAirReleaseMTA := MaleAdapterF(ManifoldAirReleaseMTA_Origin, [0; 90; 0]*deg, ND_ChemPlu, PS_Fi)
ManifoldInletFTA := CouplingF(ManifoldInletFTA_Origin, [0; 90; 0]*deg, ND_ChemPlu, PS_Fi)
ManifoldBarbUpper := TBarbF(ManifoldBarbUpper_Origin, [0; 90; 0]*deg, ND_ChemPlu, D_ChlorineTube, PS_Fi)
ManifoldBarbLower := TBarbF(ManifoldBarbLower_Origin, [0; 270; 0]*deg, ND_ChemPlu, D_ChlorineTube, PS_Fi)
ManifoldFTA2 := CouplingF(ManifoldFTA2_Origin, [0; 270; 0]*deg, ND_ChemPlu, PS_Fi)
ManifoldTee2 := TeeF(ManifoldTee2_Origin, [90; 0; 90]*deg, ND_ChemPlu, PS_Fi)
ManifoldVinegarTrapMTAR := MaleAdapterF(ManifoldVinegarTrapMTAR_Origin, [0; 0; 0]*deg, ND_ChemPlu, PS_Fi)
VinegarTrapValveLower := InsertDwg(BallValveDwg, VinegarTrapValveLower_Origin, ND_ChemPlu, 0 deg)
ManifoldVinegarTrapMTAL := MaleAdapterF(ManifoldVinegarTrapMTAL_Origin, [180; 0; 0]*deg, ND_ChemPlu, PS_Fi)
ManifoldDrainMTA := MaleAdapterF(ManifoldDrainMTA_Origin, [0; 270; 0]*deg, ND_ChemPlu, PS_Fi)
ManifoldElbow := ElbowF(ManifoldElbow_Origin, [90; 0; 270]*deg, ND_ChemPlu, PS_Fi)
ManifoldMTA3 := MaleAdapterF(ManifoldMTA3_Origin, [0; 270; 0]*deg, ND_ChemPlu, PS_Fi)
ManifoldTee3 := TeeF(ManifoldTee3_Origin, [270; 0; 90]*deg, ND_ChemPlu, PS_Fi)
ManifoldVinegarMTA := MaleAdapterF(ManifoldVinegarMTA_Origin, [0; 90; 0]*deg, ND_ChemPlu, PS_Fi)
ManifoldBarbToDropTube := TBarbF(ManifoldBarbToDropTube_Origin, [0; 0; 0]*deg, ND_ChemPlu, D_LargeChlorineTubes, PS_Fi)
ManifoldMTA4 := MaleAdapterF(ManifoldMTA4_Origin, [0; 90; 0]*deg, ND_ChemPlu, PS_Fi)
# draw all ball valves looking from the back
ManifoldAirReleaseValve := InsertDwg(BallValveDwg, [
    (-ManifoldAirReleaseValve_Origin)[0];
    ManifoldAirReleaseValve_Origin[2];
    ManifoldAirReleaseValve_Origin[1]
], ND_ChemPlu, 270 deg)
ManifoldDrainValve := InsertDwg(BallValveDwg, [(-ManifoldDrainValve_Origin)[0]; ManifoldDrainValve_Origin[2]; ManifoldDrainValve_Origin[1]], ND_ChemPlu, 90 deg)
ManifoldVinegarValve := InsertDwg(BallValveDwg, [(-ManifoldVinegarValve_Origin)[0]; ManifoldVinegarValve_Origin[2]; ManifoldVinegarValve_Origin[1]], ND_ChemPlu, 90 deg)
ManifoldAirReleaseValve2 := InsertDwg(BallValveDwg, [
    (-ManifoldAirReleaseValve2_Origin)[0];
    ManifoldAirReleaseValve2_Origin[2];
    ManifoldAirReleaseValve2_Origin[1]
], ND_ChemPlu, 270 deg)
ChlorManifoldFreeze := FreezeLayer("ChlorManifoldFittings")
ChlorManifoldFittings := stack(ChlorManifoldLayer, ManifoldInletTee, ManifoldInletBarb, ManifoldAirReleaseMTA, ManifoldInletFTA, ManifoldBarbUpper, ManifoldBarbLower, ManifoldFTA2, ManifoldTee2, ManifoldVinegarTrapMTAR, VinegarTrapValveLower, ManifoldVinegarTrapMTAL, ManifoldDrainMTA, ManifoldElbow, ManifoldMTA3, ManifoldTee3, ManifoldVinegarMTA, ManifoldBarbToDropTube, ManifoldMTA4, view("ba"), ManifoldAirReleaseValve, ManifoldDrainValve, ManifoldVinegarValve, ManifoldAirReleaseValve2, view("t"), ChlorManifoldFreeze)
ChlorManPipesLayer := layer_new("ChlorManifoldPipes", blue)
L_ManifoldPipeHoriz := ManifoldVinegarTrapMTAL_Origin[0] - ManifoldElbow_Origin[0]
ManifoldPipeHoriz := PipeF(ManifoldVinegarTrapMTAL_Origin, L_ManifoldPipeHoriz, [0; 0; 0]*deg, ND_ChemPlu, PS_Fi)
L_ManifoldPipeVert := ManifoldVinegarMTA_Origin[2] - ManifoldElbow_Origin[2] - ElbowRadius(ND_ChemPlu)
ManifoldPipeVert := PipeF(ManifoldVinegarMTA_Origin, L_ManifoldPipeVert, [0; 270; 0]*deg, ND_ChemPlu, PS_Fi)
ChlorManPipesFreeze := FreezeLayer("ChlorManifoldPipes")
L_ChlorineTubeFinal := ManifoldBarbUpper_Origin[2] - ManifoldBarbLower_Origin[2] - 2*(TBarbLength(ND_ChemPlu, D_ChlorineTube) - TBarbBLength(D_ChlorineTube) - TBarbTLength(ND_ChemPlu)) - 0.5*TBarbBLength(D_ChlorineTube)
OD_ChlorineTube := 1/4*in
ChlorManTubeLayer := layer_new("ChlorManifoldTube", blue3)
ChlorManTube := CylinderF(ManifoldTube_Origin, OD_ChlorineTube/2, L_ChlorineTubeFinal, [0; 270; 0]*deg)
ChlorManTubeFreeze := FreezeLayer("ChlorManifoldTube")
ChlorManTubeInner := CylinderF(ManifoldTube_Origin, D_ChlorineTube/2, L_ChlorineTubeFinal, [0; 270; 0]*deg)
SubtractTube := SubtractF(["ChlorManifoldTube"], "DeleteMe")
ChlorineManTubeScript := stack(ChlorManTubeLayer, ChlorManTube, ChlorManTubeFreeze, ChlorManTubeInner, GroupDelete, SubtractTube)
ChlorManifoldPipes := stack(ChlorManPipesLayer, ManifoldPipeHoriz, ManifoldPipeVert, ChlorManPipesFreeze)
ChlorManifoldPlu := stack(ChlorManifoldFittings, ChlorManifoldPipes, ChlorineManTubeScript)
# Mounted Lever and Drop Tube
# Lever Arm Slider
L_LeverArmSliderWindow := 3 cm
L_LeverArmSlider := 3*0.5*cm + L_LeverArmSliderWindow + OD_Fitting(ND_ChemPlu)
W_LeverArmSlider := T_CdcLeverArm*4
H_LeverArmSlider := H_LeverArm*1.5
# looking from the top, this is the left (-x direction), top (+y), upper (+z) point
Slider_Origin := [
    FlowMeteringTank_Origin[0] - L_EtMin - T_Et - L_CdcLeverArm*0.75;
    FlowMeteringTank_Origin[1] + (W_EtMin + W_LeverArmSlider)/2;
    Z_LeverArmFulcrum + H_LeverArmSlider/2
]
LeverSliderLyr := layer_new("LeverArmSlider", ltgrey)
LeverSliderBox := BoxF(Slider_Origin, [
    FlowMeteringTank_Origin[0] - L_EtMin - T_Et - L_CdcLeverArm*0.75 + L_LeverArmSlider;
    FlowMeteringTank_Origin[1] + W_EtMin/2 - W_LeverArmSlider/2;
    Z_LeverArmFulcrum - H_LeverArmSlider/2
], [0; 0; 0]*deg)
LeverSliderFrz := FreezeLayer("LeverArmSlider")
LeverArmUBox := BoxF([
    FlowMeteringTank_Origin[0] - L_EtMin - T_Et - L_CdcLeverArm*0.75;
    FlowMeteringTank_Origin[1] + W_EtMin/2 + 1.5*T_CdcLeverArm;
    Z_LeverArmFulcrum + 0.7*H_LeverArm/2
], [
    FlowMeteringTank_Origin[0] - L_EtMin - T_Et - L_CdcLeverArm*0.75 + L_LeverArmSlider;
    FlowMeteringTank_Origin[1] + W_EtMin/2 - W_LeverArmSlider/2 - zc;
    Z_LeverArmFulcrum - 0.7*H_LeverArm/2
], [0; 0; 0]*deg)
SliderWindowBox := BoxF([
    FlowMeteringTank_Origin[0] - L_EtMin - T_Et - L_CdcLeverArm*0.75 + 0.5 cm;
    FlowMeteringTank_Origin[1] + (W_EtMin + W_LeverArmSlider)/2;
    Z_LeverArmFulcrum + 0.5*H_LeverArm/2
], [
    FlowMeteringTank_Origin[0] - L_EtMin - T_Et - L_CdcLeverArm*0.75 + 0.5 cm + L_LeverArmSliderWindow;
    FlowMeteringTank_Origin[1] + W_EtMin/2 - W_LeverArmSlider/2;
    Z_LeverArmFulcrum - 0.5*H_LeverArm/2
], [0; 0; 0]*deg)
SubtractSliderParts := SubtractF(["LeverArmSlider"], "DeleteMe")
SliderScrewLyr := layer_new("sliderscrew", yellow)
H_SliderScrewThread := 1.5 cm
SliderScrewThread := CylinderSUBF([1 cm + Slider_Origin[0]; -W_LeverArmSlider/2 + Slider_Origin[1]; Z_LeverArmFulcrum + H_LeverArm/2], 2 mm, H_SliderScrewThread, [0; 90; 0]*deg, ["LeverArmSlider"])
SliderScrewTop := CylinderSUBF([
    1 cm + Slider_Origin[0];
    -W_LeverArmSlider/2 + Slider_Origin[1];
    Z_LeverArmFulcrum + H_LeverArm/2 + H_SliderScrewThread
], 0.75 cm, 0.5 cm, [0; 90; 0]*deg, ["LeverArmSlider"])
SliderScrewFrz := FreezeLayer("sliderscrew")
SliderScrewScript := stack(SliderScrewLyr, SliderScrewThread, SliderScrewTop, Union_All, SliderScrewFrz)
LeverSliderScript := stack(LeverSliderLyr, LeverSliderBox, LeverSliderFrz, LeverArmUBox, SliderWindowBox, GroupDelete, SubtractSliderParts, SliderScrewScript)
# Lever Arm
# mounting block
CdcMountingBlockLyr := layer_new("MountingBlock", yellow)
MountingPlate := BoxF(FlowMeteringTank_Origin + [-L_EtMin - T_Et; W_EtMin/2 - W_MountingPlate - T_CdcLeverArm/2; H_Et - H_MountingOverlap], FlowMeteringTank_Origin + [
    -L_EtMin - T_Et - T_MountingPlate;
    W_EtMin/2 - T_CdcLeverArm/2;
    H_Et - H_MountingOverlap + H_MountingPlate
], [0; 0; 0]*deg)
MountingBox := BoxF([
    -L_EtMin - T_Et + FlowMeteringTank_Origin[0];
    W_EtMin/2 - W_MountingPlate - T_CdcLeverArm/2 + FlowMeteringTank_Origin[1];
    Z_LeverArmFulcrum - W_MountingBox/2
], [
    -L_EtMin - T_Et + W_MountingBox + FlowMeteringTank_Origin[0];
    W_EtMin/2 - T_CdcLeverArm/2 + FlowMeteringTank_Origin[1];
    Z_LeverArmFulcrum + W_MountingBox/2
], [0; 0; 0]*deg)
MountingBlockFrz := FreezeLayer("MountingBlock")
CdcLeverMounting := stack(CdcMountingBlockLyr, MountingPlate, MountingBox, MountingBlockFrz)
CdcLeverLayer := layer_new("CDCLeverArm", grey)
CdcLeverArm := BoxSUBF([
    FlowMeteringTank_Origin[0] - L_EtMin - T_Et - L_CdcLeverArm;
    FlowMeteringTank_Origin[1] + (W_EtMin + T_CdcLeverArm)/2;
    Z_LeverArmFulcrum + H_LeverArm/2
], [
    FlowMeteringTank_Origin[0] - L_EtMin - T_Et + L_CdcLeverArm;
    FlowMeteringTank_Origin[1] + W_EtMin/2 - T_CdcLeverArm/2;
    Z_LeverArmFulcrum - H_LeverArm/2
], [0; 0; 0]*deg, ["LeverArmSlider"])
CdcLeverArmFulcrum := CylinderSUBF([
    -L_EtMin - T_Et + W_MountingBox/2 + FlowMeteringTank_Origin[0];
    W_EtMin/2 + T_CdcLeverArm/2 + 2 mm + FlowMeteringTank_Origin[1];
    Z_LeverArmFulcrum
], 0.5 cm, W_MountingPlate + T_CdcLeverArm + 4 mm, [90; 0; 0]*deg, ["MountingBlock"])
CdcLeverFrz := FreezeLayer("CDCLeverArm")
L_HoleOffset := 1 cm
D_Hole := 0.4 cm
LeverArmHoleL := CylinderF([
    FlowMeteringTank_Origin[0] - L_EtMin - T_Et - L_CdcLeverArm + L_HoleOffset;
    FlowMeteringTank_Origin[1] + W_EtMin/2 - T_CdcLeverArm;
    Z_LeverArmFulcrum
], D_Hole, 3*T_CdcLeverArm, [270; 0; 0]*deg)
LeverArmHoleR := CylinderF([
    FlowMeteringTank_Origin[0] - L_EtMin - T_Et + L_CdcLeverArm - L_HoleOffset;
    FlowMeteringTank_Origin[1] + W_EtMin/2 - T_CdcLeverArm;
    Z_LeverArmFulcrum
], D_Hole, 3*T_CdcLeverArm, [270; 0; 0]*deg)
SubtractLeverArmHoles := SubtractF(["CdcLeverArm"], "DeleteMe")
CdcLeverArm_Script := stack(LeverSliderScript, CdcLeverMounting, CdcLeverLayer, CdcLeverArm, CdcLeverArmFulcrum, CdcLeverFrz, LeverArmHoleL, LeverArmHoleR, GroupDelete, SubtractLeverArmHoles)
# Drop Tube
DropTubeBarbUpper_Origin := [
    Slider_Origin[0] + 1 cm + L_LeverArmSliderWindow + OR_Fitting(ND_ChemPlu);
    Slider_Origin[1] + OR_Fitting(ND_ChemPlu) + ShortTeeLength(ND_ChemPlu) + SocketDepth(ND_ChemPlu);
    Z_LeverArmFulcrum + IR(D_LargeChlorineTubes, PS_Fi)
] = [-1.34012; 1.38035; 4.73863] m
DropTubeTee_Origin := DropTubeBarbUpper_Origin + [0; -SocketDepth(ND_ChemPlu); 0]
DropTubeMTAUpper_Origin := DropTubeTee_Origin + [0; -ShortTeeLength(ND_ChemPlu); -ShortTeeLength(ND_ChemPlu) - 2*SocketDepth(ND_ChemPlu)]
DropTubeValve_Origin := DropTubeMTAUpper_Origin + [0; 0; -MaleAdapterLength(ND_ChemPlu) + SocketDepth(ND_ChemPlu)] = [-1.34012; 1.3486; 4.66322] m
DropTubeMTALower_Origin := DropTubeValve_Origin + [
    0;
    0;
    -BallValveLength(ND_ChemPlu) + 2*BallValveSocket(ND_ChemPlu) - MaleAdapterLength(ND_ChemPlu) + SocketDepth(ND_ChemPlu)
]
L_DropTubePipe := H_ChlorCalCol + 2*SocketDepth(ND_ChemPlu)
DropTubeFTA_Origin := [0; 0; -L_DropTubePipe] + DropTubeMTALower_Origin
DropTubeBarbLower_Origin := DropTubeFTA_Origin + [0; 0; SocketDepth(ND_ChemPlu) - CouplingLength(ND_ChemPlu)]
DropTubeFittingsLyr := layer_new("DropTubeFittings", green)
DropTubeTee := TeeF(DropTubeTee_Origin, [0; 90; 0]*deg, ND_ChemPlu, PS_Fi)
DropTubeMTAUpper := MaleAdapterF(DropTubeMTAUpper_Origin, [0; 270; 0]*deg, ND_ChemPlu, PS_Fi)
DropTubeMTALower := MaleAdapterF(DropTubeMTALower_Origin, [0; 90; 0]*deg, ND_ChemPlu, PS_Fi)
DropTubeBarbUpper := TBarbF(DropTubeBarbUpper_Origin, [90; 0; 0]*deg, ND_ChemPlu, D_LargeChlorineTubes, PS_Fi)
DropTubeFTA := CouplingF(DropTubeFTA_Origin, [0; 270; 0]*deg, ND_ChemPlu, PS_Fi)
DropTubeBarbLower := TBarbF(DropTubeBarbLower_Origin, [0; 90; 0]*deg, ND_ChemPlu, D_LargeChlorineTubes, PS_Fi)
DropTubeValve := InsertDwg(BallValveDwg, [(-DropTubeValve_Origin)[0]; DropTubeValve_Origin[2]; DropTubeValve_Origin[1]], ND_ChemPlu, 90 deg)
DropTubeFittingsFrz := FreezeLayer("DropTubeFittings")
DropTubeFittings := stack(DropTubeFittingsLyr, DropTubeTee, DropTubeMTAUpper, DropTubeMTALower, DropTubeBarbUpper, DropTubeFTA, DropTubeBarbLower, view("ba"), DropTubeValve, view("t"), DropTubeFittingsFrz)
DropTubePipeLyr := layer_new("DropTubePipe", blue)
DropTubePipeDraw := PipeF(DropTubeFTA_Origin, L_DropTubePipe, [0; 90; 0]*deg, ND_ChemPlu, PS_Fi)
DropTubeFrz := FreezeLayer("DropTubePipe")
DropTube := stack(DropTubePipeLyr, DropTubePipeDraw, DropTubeFrz)
DropTubePlumbing := stack(DropTubeFittings, DropTube)
# Float and Counterweight
R_Cord := 0.25 cm
CdcFloat_Origin := [
    FlowMeteringTank_Origin[0] - L_EtMin - T_Et + L_CdcLeverArm - L_HoleOffset;
    FlowMeteringTank_Origin[1] + W_EtMin/2;
    FlowMeteringTank_Origin[2] + H_Et - H_Freeboard - HL_Lfom - HL_EtOverflow - H_EtFloat/2
]
CdcFloatLyr := layer_new("CdcFloat", yellow)
CdcFloat := CylinderF(CdcFloat_Origin, OR_Fitting(ND_EtFloat), H_EtFloat, [0; 90]*deg)
CdcFloatFreeze := FreezeLayer("CdcFloat")
CdcCordLayer := layer_new("CdcFloatCord", yellow)
CdcCord := CylinderF([0; 0; H_EtFloat] + CdcFloat_Origin, R_Cord, Z_LeverArmFulcrum - (FlowMeteringTank_Origin[2] + H_Et - H_Freeboard - HL_Lfom - HL_EtOverflow + H_EtFloat/2), [0; 90]*deg)
CdcCordFrz := FreezeLayer("CdcFloatCord")
L_CounterweightCord := 15 cm
T_Counterweight := (2 + 3/16)*in = 0.0555625 m  # based on 5 lb counterbalance weight from mcmaster carr ($50) -- problem: made of cast iron
R_Counterweight := (3 + 3/4)/2*in = 0.047625 m
CdcCounterweightCordLyr := layer_new("CounterweightCord", red)
CdcCounterweightCord := CylinderF([
    FlowMeteringTank_Origin[0] - L_EtMin - T_Et - L_CdcLeverArm + L_HoleOffset;
    FlowMeteringTank_Origin[1] + W_EtMin/2;
    Z_LeverArmFulcrum
], 0.25 cm, L_CounterweightCord, [0; 270]*deg)
CdcCounterweightCordFrz := FreezeLayer("CounterweightCord")
CdcCounterweightLyr := layer_new("Counterweight", red)
CounterweightDraw := CylinderF([
    FlowMeteringTank_Origin[0] - L_EtMin - T_Et - L_CdcLeverArm + L_HoleOffset;
    FlowMeteringTank_Origin[1] + W_EtMin/2;
    Z_LeverArmFulcrum - L_CounterweightCord - T_Counterweight
], R_Counterweight, T_Counterweight, [0; 90]*deg)
CdcCounterweightFrz := FreezeLayer("Counterweight")
CounterweightScript := stack(CdcCounterweightCordLyr, CdcCounterweightCord, CdcCounterweightCordFrz, CdcCounterweightLyr, CounterweightDraw, CdcCounterweightFrz)
CdcFloatScript := stack(CdcFloatLyr, CdcFloat, CdcFloatFreeze, CdcCordLayer, CdcCord, CdcCordFrz)
# [component: inputs stack(Facility, StandScript, TankScript, EntranceDetails, ChemTanksScript, ChlorPlu, ChlorManifoldPlu, CHTScript, CdcLeverArm_Script, CdcFloatScript, CounterweightScript, DropTubePlumbing)]
L_Paper := 10.5 in
# Values of L.Paper and W.Paper can be changed depending on the desired paper size. 7.5" x 10.5" were chosen to give a .5" margin on either side of the paper to account for differences in printer margin settings.
W_Paper := 7.5 in
XStartPoint := LfomCoupling_Origin[0]
# This origin is defined in the LFOM modular code.
YStartPoint := LfomCoupling_Origin[1]
OrificeCenterDist := D_LfomOrifices + S_LfomOrificesMin
# The length of the layouts -- this was originally written to fall between orifices, but with the offset of alternating rows by half the orifice diameter, the border fell directly on the center line of the orifice. This would pose a problem when piecing the sheets together on-site, as the orifice center may not be exact. L.Border is offset by the orifice diameter to avoid this issue.
L_Border := floor(L_Paper/OrificeCenterDist)*OrificeCenterDist - D_LfomOrifices
W_Border := floor(W_Paper/(H_LfomOrifices[1] - H_LfomOrifices[0]))*(H_LfomOrifices[1] - H_LfomOrifices[0])
# The width of the layouts -- this is as close as possible to W.Paper without cutting off any orifices.
Labels := ["A"; "B"; "C"; "D"; "E"; "F"; "G"; "H"; "I"; "J"; "K"; "L"; "M"; "O"; "P"]
# Variables
# Create Layouts
LabelLayout(Text, TextSize, Start, End, Rotation) := concat("-mtext ", point(Start), sp, "height ", stringit(TextSize), sp, "r ", stringit(Rotation), sp, point(End), sp, Text)
CreateLayout(LayoutName) := concat("-layout ", "n ", stringit(LayoutName), sp)
SetLayout(LayoutName) := concat("-layout ", "s ", stringit(LayoutName), sp)
VPortErase(VPort1, VPort2) := concat(".erase ", point(VPort1), sp, point(VPort2), sp)
VPortNew(Corner1, Corner2) := concat("-vport ", point(Corner1), sp, point(Corner2), sp, "z ", "e")
ChangeView(CornerA, CornerB) := concat("ms ", "z ", "w ", point(CornerA), sp, point(CornerB), sp, "ps")
N_HLayouts :=
    Layouts ← round((OrificeCenterDist*N_LfomOrifices[0] + D_LfomOrifices)/L_Border) if (OrificeCenterDist*N_LfomOrifices[0] + D_LfomOrifices)/L_Border > 1.5
    Layouts ← ceil((OrificeCenterDist*N_LfomOrifices[0] + D_LfomOrifices)/L_Border) if (OrificeCenterDist*N_LfomOrifices[0] + D_LfomOrifices)/L_Border < 1.5
    return Layouts
# Calculates the number of horizontal layouts
# Calculates the number of vertical layouts (other than the first row of layouts).
N_VLayouts := round((H_LfomOrifices[last(H_LfomOrifices)] + D_LfomOrifices/2)/W_Border)
N_TLayouts :=
    Layouts ← round((OrificeCenterDist*N_LfomOrifices[last(N_LfomOrifices)] + D_LfomOrifices)/L_Border) if (OrificeCenterDist*N_LfomOrifices[last(N_LfomOrifices)] + D_LfomOrifices)/L_Border > 1
    Layouts ← ceil((OrificeCenterDist*N_LfomOrifices[last(N_LfomOrifices)] + D_LfomOrifices)/L_Border) if (OrificeCenterDist*N_LfomOrifices[last(N_LfomOrifices)] + D_LfomOrifices)/L_Border < 1
    return Layouts
# Calculates the number of horizontal layouts in the second row. Originally, the second row of layouts was the top row, however, with changes to the LFOM code, there can now be three or more vertical layouts. A way to calculate the number of orifices in these top rows must be determined.
SetUpHLayouts(N_Layout) :=
    Num ← 1 m
    Layout ← CreateLayout(Num)
    for a ∈ 1 .. N_Layout
        if a == 1
            Layout ← stack(Layout, SetLayout(Num), VPortErase([0; 0]*m, [10; 7.7]*m), VPortNew([.013; .013]*m, [.013 m + L_Border + D_LfomOrifices/2; W_Border + .013 m]), ChangeView([
                XStartPoint - D_LfomOrifices/2 + ((floor(L_Paper/OrificeCenterDist)*OrificeCenterDist)*(a - 1));
                YStartPoint
            ], [XStartPoint + L_Border*a; YStartPoint + W_Border]))
        if a > 1
            Layout ← stack(Layout, CreateLayout(Num), SetLayout(Num), VPortErase([0; 0]*m, [10; 7.7]*m), VPortNew([.013; .013]*m, [.013 m + L_Border + D_LfomOrifices/2; W_Border + .013 m]), ChangeView([
                XStartPoint - D_LfomOrifices/2 + (floor(L_Paper/OrificeCenterDist)*OrificeCenterDist)*(a - 1);
                YStartPoint
            ], [XStartPoint + L_Border*a; YStartPoint + W_Border]))
        Num ← Num + 1 m
    return Layout
# Renders layouts in bottom row. It might be helpful to combine these three functions (SetUpHLayouts,SetUpTLayouts, and SetUpVLayouts) into one function -- perhaps nested for-loops, as if one were traversing a matrix, now that the LFOM design has been modified for higher flow rates. The design now includes a 40cm LFOM for high flow rates, so there is a need for three rows  of layouts.
SetUpTLayouts(N_Layout) :=
    Num ← (N_HLayouts + 1)*m + 1 m
    Layout ← CreateLayout(Num)
    for c ∈ N_Layout
        if c == 1
            Layout ← stack(Layout, SetLayout(Num), VPortErase([0; 0]*m, [10; 7.7]*m), VPortNew([.013; .013]*m, [.013 m + L_Border + D_LfomOrifices/2; W_Border + .013 m]), ChangeView([
                XStartPoint - D_LfomOrifices/2 + ((floor(L_Paper/OrificeCenterDist)*OrificeCenterDist)*c);
                YStartPoint + W_Border
            ], [XStartPoint + L_Border*(c + 1); YStartPoint + 2*W_Border]))
        if c > 1
            Layout ← stack(Layout, CreateLayout(Num), SetLayout(Num), VPortErase([0; 0]*m, [10; 7.7]*m), VPortNew([.013; .013]*m, [.013 m + L_Border + D_LfomOrifices/2; W_Border + .013 m]), ChangeView([
                XStartPoint - D_LfomOrifices/2 + ((floor(L_Paper/OrificeCenterDist)*OrificeCenterDist)*c);
                YStartPoint + W_Border
            ], [XStartPoint + L_Border*(c + 1); YStartPoint + 2*W_Border]))
        Num ← Num + 1 m
    return Layout
# Renders layouts in second row (other than the first layout of the second row -- this is accounted for in SetUpVLayouts). Only used if N.TLayouts>1. See comment above about LFOM changes. This function needs to be modified.
SetUpVLayouts(N_Layout) :=
    Num ← N_HLayouts*m + 1 m
    Layout ← CreateLayout(Num)
    for b ∈ 1 .. N_Layout
        if b == 1
            Layout ← stack(Layout, SetLayout(Num), VPortErase([0; 0]*m, [10; 7.7]*m), VPortNew([.013; .013]*m, [.013 m + L_Border + D_LfomOrifices/2; W_Border + .013 m]), ChangeView([
                XStartPoint - D_LfomOrifices/2 + ((floor(L_Paper/OrificeCenterDist)*OrificeCenterDist)*(b - 1));
                YStartPoint + W_Border*b
            ], [XStartPoint + L_Border*b; YStartPoint + W_Border*(b + 1)]))
        if b > 1
            Layout ← stack(Layout, CreateLayout(Num), SetLayout(Num), VPortErase([0; 0]*m, [10; 7.7]*m), VPortNew([.013; .013]*m, [.013 m + L_Border + D_LfomOrifices/2; W_Border + .013 m]), ChangeView([
                XStartPoint - D_LfomOrifices/2 + ((floor(L_Paper/OrificeCenterDist)*OrificeCenterDist)*(b - 1));
                YStartPoint + W_Border*b
            ], [XStartPoint + L_Border*b; YStartPoint + W_Border*(b + 1)]))
        Num ← Num + N_TLayouts*m + 1 m
    Layout ← stack(Layout, SetUpTLayouts(N_TLayouts)) if N_TLayouts > 1
    return Layout
# Renders vertical layouts -- does not work properly when more than two rows of layouts are needed (i.e. for flow rates above 60L/s). (Needs to be modified -- see first comment.)
DimStyle(H_Component) := concat("-dimstyle ", "st ", "dimtxt ", stringit(H_Component), sp, "dimasz ", stringit(H_Component), sp, "dimgap ", stringit(H_Component), sp, "dimcen ", stringit(0.0000 m), sp)
# Changes dimension style for last orifice of bottom row
LfomDiameterDim := concat(DimStyle(.005 m), "_dimdiameter ", point([
    XStartPoint + (OrificeCenterDist*N_LfomOrifices[0]) - D_LfomOrifices/2 - S_LfomOrificesMin + (D_LfomOrifices/2*sqrt(2)/2);
    H_LfomOrifices[0] + (D_LfomOrifices/2*sqrt(2)/2)
]), sp, point([
    XStartPoint + (OrificeCenterDist*N_LfomOrifices[0] - D_LfomOrifices/2 + S_LfomOrificesMin) + (D_LfomOrifices/2*sqrt(2)/2);
    H_LfomOrifices[0] + (D_LfomOrifices/2*sqrt(2)/2)
]))  # Draws dimension
Boundary := concat("_line ", point([XStartPoint - D_LfomOrifices/2; YStartPoint + H_LfomOrifices[0] - D_LfomOrifices/2]), sp, point([
    XStartPoint - D_LfomOrifices/2;
    YStartPoint + H_LfomOrifices[last(H_LfomOrifices)] + W_Border - D_LfomOrifices/2
]), sp, "_line ", point([XStartPoint - D_LfomOrifices/2; YStartPoint + H_LfomOrifices[0] - D_LfomOrifices/2]), sp, point([
    (XStartPoint + N_HLayouts*L_Border + ((N_HLayouts - 1)*D_LfomOrifices/2));
    YStartPoint + H_LfomOrifices[0] - D_LfomOrifices/2
]), sp)
Zoom := concat("z ", "e")
CreateLabel(Str1, Str2) := concat("Page ", Str1, Str2)
CopyText(Object, BasePt, DisPt) := concat("copy ", point(Object), sp, point(BasePt), sp, sp, "mode ", "single ", sp, point(DisPt))
DelineateL(XStartPoint, YStartPoint) := concat("_line ", point([XStartPoint + L_Border; YStartPoint + (H_LfomOrifices[0] - D_LfomOrifices/2)]), sp, point([
    XStartPoint + L_Border;
    YStartPoint + H_LfomOrifices[last(H_LfomOrifices)] + W_Border - D_LfomOrifices/2
]), sp)  # Inserts border "lengthwise"
LabelT(XStartPoint) :=
    TempX ← XStartPoint
    Line ← Boundary
    c ← 0
    while XStartPoint < TempX + ((N_TLayouts - 1)*L_Border)
        Label_MiddleS ← [XStartPoint + L_Border - 1 cm; YStartPoint + (3/2*W_Border) - 1 cm]
        Label_MiddleE ← [XStartPoint + L_Border - 1 cm; YStartPoint + (3/2*W_Border) + 2 cm]
        Label_TopS ← [XStartPoint + L_Border - 1 cm; YStartPoint + 2*W_Border - 2 cm]
        Label_TopE ← [XStartPoint + L_Border - .5 cm; YStartPoint + 2*W_Border - .5 cm]
        Label_BottS ← [XStartPoint + L_Border - 5 cm; YStartPoint + W_Border - 1 cm]
        Label_BottE ← [XStartPoint + L_Border - 2 cm; YStartPoint + W_Border - .5 cm]
        Line ← stack(Line, Zoom, LabelLayout(CreateLabel(Labels[:, 0][c + N_HLayouts], Labels[:, 0][c + N_HLayouts + 1]), .005 m, Label_MiddleS, Label_MiddleE, 90 m), "", MirrorLast([XStartPoint + L_Border; YStartPoint], [XStartPoint + L_Border; YStartPoint + 2*W_Border], "n"), LabelLayout(Labels[:, 0][c + N_HLayouts], .005 m, Label_TopS, Label_TopE, 0 m), "", LabelLayout(CreateLabel(Labels[:, 0][c], Labels[:, 0][c + N_HLayouts]), .005 m, Label_BottS, Label_BottE, 0 m), "", MirrorLast([(XStartPoint + L_Border)/2; YStartPoint + W_Border], [XStartPoint + L_Border; YStartPoint + W_Border], "n"), Zoom)
        XStartPoint ← XStartPoint + L_Border + D_LfomOrifices/2
        c ← c + 1
    Label_TopS ← [XStartPoint + L_Border - 1 cm; YStartPoint + 2*W_Border - 2 cm]
    Label_TopE ← [XStartPoint + L_Border - .5 cm; YStartPoint + 2*W_Border - .5 cm]
    Label_BottS ← [XStartPoint + L_Border - 5 cm; YStartPoint + W_Border - 1 cm]
    Label_BottE ← [XStartPoint + L_Border - 2 cm; YStartPoint + W_Border - .5 cm]
    Line ← stack(Line, Zoom, LabelLayout(Labels[:, 0][c + N_HLayouts], .005 m, Label_TopS, Label_TopE, 0 m), "", LabelLayout(CreateLabel(Labels[:, 0][c], Labels[:, 0][c + N_HLayouts]), .005 m, Label_BottS, Label_BottE, 0 m), "", MirrorLast([(XStartPoint + L_Border)/2; YStartPoint + W_Border], [XStartPoint + L_Border; YStartPoint + W_Border], "n"), Zoom) if XStartPoint < TempX + (N_TLayouts*L_Border)
    return Line
# Labels the layout for the second row. This function was created before the 40cm LFOM design, so it must be modified to account for multiple rows of layouts.
DelineateLMultiple(XStartPoint, YStartPoint) :=
    TempX ← XStartPoint
    Line ← Boundary
    b ← 0
    while XStartPoint < TempX + ((N_HLayouts - 1)*L_Border)
        Label_MiddleS ← [XStartPoint + L_Border - 1 cm; (YStartPoint + W_Border)/2 - 1 cm]
        Label_MiddleE ← [XStartPoint + L_Border - 1 cm; (YStartPoint + W_Border)/2 + 2 cm]
        Label_TopS ← [XStartPoint + L_Border - 1 cm; YStartPoint + W_Border - 2 cm]
        Label_TopE ← [XStartPoint + L_Border - .5 cm; YStartPoint + W_Border - .5 cm]
        Line ← stack(Line, DelineateL(XStartPoint, YStartPoint), Zoom, LabelLayout(CreateLabel(Labels[:, 0][b], Labels[:, 0][b + 1]), .005 m, Label_MiddleS, Label_MiddleE, 90 m), "", MirrorLast([XStartPoint + L_Border; YStartPoint], [
            XStartPoint + L_Border;
            YStartPoint + H_LfomOrifices[last(H_LfomOrifices)] + W_Border - D_LfomOrifices/2
        ], "n"), LabelLayout(Labels[:, 0][b], .005 m, Label_TopS, Label_TopE, 0 m), "", Zoom)
        XStartPoint ← (XStartPoint + L_Border + D_LfomOrifices/2)
        b ← b + 1
    Label_TopS ← [XStartPoint + L_Border - 1 cm; YStartPoint + W_Border - 2 cm]
    Label_TopE ← [XStartPoint + L_Border - .5 cm; YStartPoint + W_Border - .5 cm]
    Line ← stack(Line, DelineateL(XStartPoint, YStartPoint), Zoom, LabelLayout(Labels[:, 0][b], .005 m, Label_TopS, Label_TopE, 0 m), "", Zoom) if XStartPoint < TempX + (N_HLayouts*L_Border)
    return Line  # Delineates the first row of layouts and labels them appropriately.
DelineateW(XStartPoint, YStartPoint) := concat("_line ", point([XStartPoint - D_LfomOrifices/2; YStartPoint + W_Border]), sp, point([XStartPoint + N_HLayouts*L_Border + (N_HLayouts - 1)*D_LfomOrifices/2; YStartPoint + W_Border]), sp)
# Inserts border vertically
DelineateWMultiple(XStartPoint, YStartPoint) :=
    TempY ← YStartPoint
    Line ← Boundary
    a ← 0
    while YStartPoint ≤ TempY + N_VLayouts*W_Border
        Line ← stack(Line, DelineateW(XStartPoint, YStartPoint))
        YStartPoint ← YStartPoint + W_Border
        a ← a + 1
    return Line  # Inserts multiple vertical borders
# Drawing Functions
# Template Code
LfomOrificesTemplate :=
    Local ← view("t")
    for h ∈ 0 .. last(H_LfomOrifices)
        origin ← [
            XStartPoint + (D_LfomOrifices + S_LfomOrificesMin)/2*(mod(h, 2) == 0);
            YStartPoint + H_LfomOrifices[h]
        ]
        Crosshair ← concat("z ", "e ", "_line ", point(origin[:, 0] - [D_LfomOrifices/4; 0 m]), sp, point(origin[:, 0] + [D_LfomOrifices/4; 0 m]), sp, sp, "_line ", point(origin[:, 0] - [0 m; D_LfomOrifices/4]), sp, point(origin[:, 0] + [0 m; D_LfomOrifices/4]), sp)
        PointArray ← [
            [origin[0] - D_LfomOrifices/3; origin[1]];
            [origin[0]; origin[1] - D_LfomOrifices/3];
            [origin[0] + (D_LfomOrifices/2*sqrt(2)/2); origin[1]];
            [origin[0]; origin[1] + (D_LfomOrifices/2*sqrt(2)/2)]
        ]
        Local ← stack(Local, circle(origin, D_LfomOrifices/20), circle(origin, D_LfomOrifices/2), Crosshair) if N_LfomOrifices[h] ≠ 0
        Local ← stack(Local, ArrayMultiple(PointArray, 1, N_LfomOrifices[h], 0, OrificeCenterDist)) if N_LfomOrifices[h] > 1
    Local ← stack(Local, LfomDiameterDim, DelineateLMultiple(XStartPoint, YStartPoint), DelineateWMultiple(XStartPoint, YStartPoint), LabelT(XStartPoint), SetUpHLayouts(N_HLayouts), SetUpVLayouts(N_VLayouts))
    return Local  # Code to generate the template: brings together all of the functions above.
# [component: inputs LfomOrificesTemplate]
ND_Thread := 1.5 in
ND_Barb := 3/8*in
EN := PS_Fi
OriginPoint := [0; 0; 0]
AngleVector := [0; 0; 0]*deg
# [component: inputs CHTInletBarb]
