## Chemical Dose Controller Dosing Tube Design
Π_Q := 0.1  # minimum flow rate at which the error requirement must be met. Note that setting this to zero doesn't make a big difference.
# Select the set of available tubing diameters
HL_CdcMax := 20 cm
Π_Error := 10 %  # maximum error allowed between linear and actual assuming calibration at the maximum flow rate
# [component: outputs tubediameterunitsystem]
D_TubeEnglish := [0.0625; 0.125; 0.17; 0.25]*in
D_TubeMetric := [2; 3; 4; 5; 6; 7]*mm
Nu_Water := 1*mm^2/s
K_Minor := 4  # Assumed total minor losses for the dosing system. This is scaled with the average velocity in the small diameter dosing tube.
# [component: outputs EN_Coag]
C_CoagMax := 45*mg/L
C_CoagStockMax := 400*gm/L
L_CdcTubeMax := 2 m  # The maximum length of tubing that we are willing to use.
L_CdcTubeMin := 0.5 m
x := 5 in
Re_PipeTransition := 2100
D_CdcTubeAvailable :=
    D ← D_TubeMetric if tubediameterunitsystem
    D ← D_TubeEnglish otherwise
    return D
D_CdcTubeAvailable = [0.0625; 0.125; 0.17; 0.25] in
Nu_Alum(C_Alum) := (1 + 4.255*10^-6*(C_Alum/(kg/m^3))^2.289)*Nu_Water
Nu_PACl(C_PACl) := (1 + 2.383*10^-5*(C_PACl/(kg/m^3))^1.893)*Nu_Water
Nu_Coag(C_Coag, EN_Coag) :=
    Nu ← Nu_Alum(C_Coag) if EN_Coag == 0
    Nu ← Nu_PACl(C_Coag) otherwise
    return Nu
# This is the maximum flow rate through a single CDC tube, calculated by eliminating diameter from the Hagen-Poiseuille equation by using the maximum Reynolds number constraint. For higher flows multiple parallel tubes can be used. Minor losses are ignored in this calculation,
# since it is assumed that major losses will dominate in the final design.
Q_MaxLaminar(L_TubeMin, HL_Max, ν) := (L_TubeMin*Re_PipeTransition^4*π^3*ν^5/(2*g*HL_Max))^(1/3)
# Minimum diameter required to get laminar flow at max flow based on Reynolds number for transition to turbulence
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D_TubeMinLaminar(Q_Max, ν) := 4*Q_Max/(π*ν*Re_PipeTransition)
# Now we can calculate the diameter of tubing required to accomodate the largest flow that a flow control module can deliver without requiring an excessively long tube
# Length of tube required to get desired head loss at maximum flow based on the Hagen-Poiseuille equation.
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L_Tube(Q_Max, D, h_f, ν, K_Minor) := (h_f*g*π*D^4/Q_Max - K_Minor*8*Q_Max/π)/(128*ν)
# Now calculate the minimum diameter to ensure less than 10% error in flow caused by minor losses
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D_MinKError(Q_Max, HL) := (8*Q_Max^2*K_Minor/((1 - Π_Error)*HL*g*π^2)*(1/Π_Error - Π_Q))^(1/4)
D_MinKError(2*mL/s, HL_CdcMax) = 2.92037 mm
# The minimum diameter is the maximum of the diameter calculated by the previous two equations.
D_TubeMin(Q_Max, HL, ν) := max(D_TubeMinLaminar(Q_Max, ν), D_MinKError(Q_Max, HL))
Q_MinError(D_Tube, HL) := π*D_Tube^2*sqrt((1 - Π_Error)*HL*g*Π_Error/(8*K_Minor))
Q_MinError(D_CdcTubeAvailable, HL_CdcMax) = [0.588029; 2.35212; 4.35048; 9.40847] mL/s
# Define a range of flows that we will use to plot the results.
Q_Range := 10*mL/min, 10.2*mL/min .. Q_MinError(D_CdcTubeAvailable[last(D_CdcTubeAvailable)], HL_CdcMax)
## Tube diameter constraints
# Now let's add the constraint of given tube diameters. First we write a function that will round up to the up to the next available tube size.
RoundGeneral(x, Array, Direction) :=
    Array ← sort(Array)
    i ← 0
    while x > Array[i]
        i ← i + 1
    return Array[i - 1 + Direction]
# The input "Direction" is for rounding up (1) or rounding down (0).
# Now we use the forceround function to find the design tube diameter based on the minimum tube diameter and the available tube diameters.
D_Design(Q_Max, HL_Max, ν) := RoundGeneral(D_TubeMin(Q_Max, HL_Max, ν), D_CdcTubeAvailable, 1)
# At very low flows the design will fail given a finite set of tube diameters. Thus calculate the minimum design flow that can be produced based on the Hagen-Poiseuille equation.
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Q_Min(L_TubeMax, HL_Max, D_TubeMin, ν) := HL_Max*g*π*D_TubeMin^4/(128*ν*L_TubeMax)
# Redefine the flow rate to only include the feasible range given the constraints. Note that the minimum flow plotted is the minimum design flow. The design flow is the maximum flow for a flow control module.
Q_Range := Q_Min(L_CdcTubeMax, HL_CdcMax, D_CdcTubeAvailable[0], Nu_Coag(C_CoagMax, EN_Coag)), Q_Min(L_CdcTubeMax, HL_CdcMax, D_CdcTubeAvailable[0], Nu_Coag(C_CoagMax, EN_Coag)) + 1*mL/min .. Q_MaxLaminar(L_CdcTubeMax, HL_CdcMax, Nu_Coag(C_CoagMax, EN_Coag))
# The maximum tube length constraint may be violated if there aren't enough available tubing diameters.
L_maxLine(Q) := L_CdcTubeMax
# Graphs and stuff
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Q_KError(D) := sqrt((1 - Π_Error)*h_lmax*g*π^2*D^4/(8*K_Minor*(1/Π_Error - Π_Q)))
# Given a set of available diameter tubes we can calculate the flow rate for the shortest tube for each diameter.
# Constraints for this design
# Stock concentration must be less than some value (400 gm/L)
# Length must be less than 3 m
Q_MaxArray := Q_KError(D_available)
C_StockArray := C_CoagMax*Q_Plant/Q_MaxArray
L_MinArray := L_tube(Q_MaxArray, D_available, h_lmax, Nu_Coag(C_StockArray, EN_Coag), K_Minor)
D_Useful :=
    i ← 0
    for j ∈ 0 .. last(D_available)
        if L_MinArray[j] < L_max and C_StockArray[j] < C_StockMax
            D_Useful[i] ← D_available[j]
            i ← i + 1
    return D_Useful
D_Useful =  # error: This variable is undefined.
Q_Stock := Q_KError(D_Useful)
C_Stock := C_CoagMax*Q_Plant/Q_Stock
L_DoseTube := L_tube(Q_Stock, D_Useful, h_lmax, Nu_Coag(C_Stock, EN_Coag), K_Minor)
# Design for Agalteca is below. Note that we are using slightly higher flow rate than recommended
C_StockActual := 120*gm/L
Q_StockActual := Q_Plant*C_CoagMax/C_StockActual
L_DoseTubeActual := L_tube(Q_StockActual, D_Useful, h_lmax, Nu_Coag(C_StockActual, EN_Coag), K_Minor)
