# [component: outputs EN_Coag]
# I propose that we make all dosers using the 1/8" tubing.
# We need a design that makes it easy to install different numbers of dosing tubes.
# At a certain number of dosing tubes it will be necessary to switch to a different float valve. We need to identify that transition and at that transition it would make sense to switch to larger diameter feed tubes for the CHT.
C_CoagMax := 60*mg/L
Pi_CdcError := 10 %
HL_CdcTube := 20 cm
D_CdcTube := 1/8*in
K_Minor := 4
Nu_Water := 1*mm^2/s
C_CoagStockMax := 300*gm/L
Q_CdcMax := Q_Plant*C_CoagMax/C_CoagStockMax
Nu_Alum(C_Alum) := (1 + 4.255*10^-6*(C_Alum/(kg/m^3))^2.289)*Nu_Water
Nu_PACl(C_PACl) := (1 + 2.383*10^-5*(C_PACl/(kg/m^3))^1.893)*Nu_Water
Nu_Coag(C_Coag, EN_Coag) :=
    Nu ← Nu_Alum(C_Coag) if EN_Coag == 0
    Nu ← Nu_PACl(C_Coag) otherwise
    return Nu
Q_KError(D, HL_Max, K_Minor, Pi_CdcError) := π*D^2/4*sqrt(2*(1 - Pi_CdcError)*Pi_CdcError*HL_Max*g/K_Minor)
# Length of tube required to get desired head loss at maximum flow based on the Hagen-Poiseuille equation with minor losses.
L_tube(Q_max, D, h_lmax, ν, K_Minor) := (h_lmax*g*π*D^4/Q_max - K_Minor*8*Q_max/π)/(128*ν)
Q_CoagCdcDosingTube := Trunc(Q_KError(D_CdcTube, HL_CdcTube, K_Minor, Pi_CdcError), 1*mL/s) = 2 mL/s
N_CoagCdcTubes := ceil(C_CoagMax*Q_Plant/(C_CoagStockMax*Q_CoagCdcDosingTube)) = 4
Q_CoagStock := 2*mL/s*N_CoagCdcTubes = 8 mL/s
C_CoagStock := C_CoagMax*Q_Plant/Q_CoagStock = 240 gm/L
L_CoagCdcTube := L_tube(Q_CoagStock/N_CoagCdcTubes, D_CdcTube, HL_CdcTube, Nu_Coag(C_CoagStock, EN_Coag), K_Minor) = 1.29663 m
# Need the following...
# select correct Kerick valve based on coag flow and allowable head loss between stock tank and constant head tank
# Select flexible tubing size between stock tank and CHT.
# Select connectors/adaptors required.
D_FltVlvOrificesAvail := [0.093 in; 0.187 in; 0.25 in; 0.312 in]
D_FloatValveOrifice :=
    i ← 0
    while h_orifice(D_FltVlvOrificesAvail[i], Pi_VenaContractaOrifice, Q_CdcMax) ≥ H_CoagTankAboveHeadTank
        i ← i + 1
    return D_FltVlvOrificesAvail[i]
D_FloatValveOrifice =  # error: This variable is undefined.
HL_FloatValveOrifice := h_orifice(D_FloatValveOrifice, Pi_VenaContractaOrifice, Q_CdcMax) = 8.66816 cm
L_TubeStockToCHEst := 1 m
HL_TubeStockToCHMax := H_CoagTankAboveHeadTank - HL_FloatValveOrifice = 21.3318 cm
D_TubeStockToCHEst := (128*Nu_Water*L_TubeStockToCHEst*Q_CdcMax/(π*g*HL_TubeStockToCHMax))^(1/4) = 0.113925 in
D_TubeStockToCH := max(3/8*in, D_TubeStockToCHEst) = 0.375 in
# Use 3/8" tubing to connect the stock tank/calibration column to the constant head tank unless a larger tube is needed (which it probably never will be).
