## Chemical Dose Controller Dosing Tube Design
Π_Q := 0  # minimum flow rate at which the error requirement must be met. Note that setting this to zero doesn't make a big difference.
# Select the set of available tubing diameters
h_lmax := 20 cm
Π_Error := 10 %  # maximum error allowed between linear and actual assuming calibration at the maximum flow rate
# [component: outputs tubediameterunitsystem]
D_english := [0.0625; 0.125; 0.17; 0.25]*in
D_metric := [2; 3; 4; 5; 6; 7]*mm
Nu_Water := 1*mm^2/s
K_Minor := 4  # Assumed total minor losses for the dosing system. This is scaled with the average velocity in the small diameter dosing tube.
# [component: outputs EN_Coag]
L_max := 4 m
C_StockMax := 400*gm/L
Q_Plant := 12*L/s
C_CoagMax := 50*mg/L
# The maximum length of tubing that we are willing to use.
D_available :=
    D ← D_metric if tubediameterunitsystem
    D ← D_english otherwise
    return D
D_available = [0.0015875; 0.003175; 0.004318; 0.00635] m
Nu_Alum(C_Alum) := (1 + 4.255*10^-6*(C_Alum/(kg/m^3))^2.289)*Nu_Water
Nu_PACl(C_PACl) := (1 + 2.383*10^-5*(C_PACl/(kg/m^3))^1.893)*Nu_Water
Nu_Coag(C_Coag, EN_Coag) :=
    Nu ← Nu_Alum(C_Coag) if EN_Coag == 0
    Nu ← Nu_PACl(C_Coag) otherwise
    return Nu
Nu_Coag(C_StockMax, EN_Coag) = 4.84605e-6 m^2/s
Re_max := 2100
# This is the maximum flow that can be sent through the alum feeder without requiring extremely long tubes is based on eliminating diameter from the Hagen-Poiseuille equation by using the maximum Reynolds number constraint. For higher flows multiple parallel tubes could be used. However the maximum flow rate that can be handled by the float valve needs to be considered.
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Q_maxlaminar(L_max, h_lmax, ν) := (L_max*Re_max^4*π^3*ν^5/(2*g*h_lmax))^(1/3)
# Minimum diameter required to get laminar flow at max flow based on Reynolds number for transition to turbulence
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D_minlaminar(Q_max, ν) := 4*Q_max/(π*ν*Re_max)
# Now we can calculate the diameter of tubing required to accomodate the largest flow that a flow control module can deliver withohut requiring an excessively long tube
# Length of tube required to get desired head loss at maximum flow based on the Hagen-Poiseuille equation.
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L_tube(Q_max, D, h_lmax, ν, K_Minor) := (h_lmax*(g*π*D^4)/Q_max - K_Minor*8*Q_max/π)/(128*ν)
# Now calculate the minimum diameter to ensure less than 10% error in flow caused by minor losses
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D_MinKError(Q_Max, h_lMax) := (8*Q_Max^2*K_Minor/((1 - Π_Error)*h_lMax*g*π^2)*(1/Π_Error - Π_Q))^(1/4)
D_MinKError(2*mL/s, h_lmax) = 2.92772 mm
# The minimum diameter is the maximum of the diameter calculated by the previous two equations.
D_min(Q_max, h_lmax, ν) := max(D_minlaminar(Q_max, ν), D_MinKError(Q_max, h_lmax))
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Q_MinError(D) := π*D^2*sqrt((1 - Π_Error)*h_lmax*g*Π_Error/(8*K_Minor))
Q_MinError(D_available) = [0.588029; 2.35212; 4.35048; 9.40847] mL/s
# Define a range of flows that we will use to plot the results.
Q_range := 10*mL/min, 10.2*mL/min .. Q_MinError(D_available[last(D_available)])
## Tube diameter constraints
# Now let's add the constraint of given tube diameters. First we write a function that will round up to the up to the next available tube size.
forceround(x, xarray, direction) :=
    xarray ← sort(xarray)
    i ← 0
    while x > xarray[i]
        i ← i + 1
    return xarray[i - 1 + direction]  # direction is for rounding up (1) or rounding down (0).
# Now we use the forceround function to find the design tube diameter based on the minimum tube diameter and the available tube diameters.
D_design(Q_max, h_lmax, ν) := forceround(D_min(Q_max, h_lmax, ν), D_available, 1)
# At very low flows the design will fail given a finite set of tube diameters. Thus calculate the minimum design flow that can be produced based on the Hagen-Poiseuille equation.
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Q_min(L_max, h_lmax, D_min, ν) := h_lmax*g*π*D_min^4/(128*ν*L_max)
# Redefine the flow rate to only include the feasible range given the constraints. Note that the minimum flow plotted is the minimum design flow. The design flow is the maximum flow for a flow control module.
Q_range := Q_min(L_max, h_lmax, D_available[0], Nu_Coag(C_CoagMax, EN_Coag)), Q_min(L_max, h_lmax, D_available[0], Nu_Coag(C_CoagMax, EN_Coag)) + 1*mL/min .. Q_maxlaminar(L_max, h_lmax, Nu_Coag(C_CoagMax, EN_Coag))
# The maximum tube length constraint may be violated if there aren't enough available tubing diameters.
L_maxLine(Q) := L_max
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Q_KError(D) := sqrt((1 - Π_Error)*h_lmax*g*π^2*D^4/(8*K_Minor*(1/Π_Error - Π_Q)))
## Graphs showing potential solutions
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# Constraints for this design
# Stock concentration must be less than some value (400 gm/L)
# Length must be less than 3 m
Q_MaxArray := Q_KError(D_available) = [0.588029; 2.35212; 4.35048; 9.40847] mL/s
C_StockArray := C_CoagMax*Q_Plant/Q_MaxArray = [1020.36; 255.089; 137.916; 63.7723] gm/L
L_MinArray := L_tube(Q_MaxArray, D_available, h_lmax, Nu_Coag(C_StockArray, EN_Coag), K_Minor) = [0.0139963; 0.797379; 2.6199; 7.15856] m
D_Useful :=
    i ← 0
    for j ∈ 0 .. last(D_available)
        if L_MinArray[j] < L_max and C_StockArray[j] < C_StockMax
            D_Useful[i] ← D_available[j]
            i ← i + 1
    return D_Useful
Q_KError(D_available)
C_CoagMax*Q_Plant/Q_range
D_Useful = [3.175; 4.318] mm
Q_Stock := Q_KError(D_Useful) = [2.35212; 4.35048] mL/s
C_Stock := C_CoagMax*Q_Plant/Q_Stock = [255.089; 137.916] gm/L
L_DoseTube := L_tube(Q_Stock, D_Useful, h_lmax, Nu_Coag(C_Stock, EN_Coag), K_Minor) = [0.797379; 2.6199] m
Nu_Coag(C_Stock, EN_Coag) = [2.37347e-6; 1.33611e-6] m^2/s
# [reference: FluidsFunctions.xmcd]
K_MinorGraph := 10
ν := Nu_Coag(C_Stock[0], EN_Coag)
Q_Graph := 0.01*mL/s, 0.02*mL/s .. Q_Stock[0]
D := 1/8*in
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# Design for Agalteca is below.
Q_Plant := 6*L/s
C_StockActual := 120*gm/L
D_Actual := 1/8*in
Q_StockActual := Q_Plant*C_CoagMax/C_StockActual = 2.5 mL/s
L_DoseTubeActual := L_tube(Q_StockActual, D_Actual, h_lmax, Nu_Coag(C_StockActual, EN_Coag), K_Minor) = 1.41251 m
# We need a solution scheme that creates a viable solution for any plant flow rate. It needs to switch to multiple dosing tubes for large flow rate plants.
# Design for Alauca is below
C_CoagMax := 60*mg/L
Q_Plant := 12*L/s
D_Actual := 1/8*in
N_Tubes := 2
Q_StockActual := 2*mL/s*N_Tubes
C_StockActual := C_CoagMax*Q_Plant/Q_StockActual = 180 kg/m^3
L_DoseTubeActual := L_tube(Q_StockActual/N_Tubes, D_Actual, h_lmax, Nu_Coag(C_StockActual, EN_Coag), K_Minor) = 1.41302 m
