# [reference: MasterProgram.xmcd]
# Chemical Storage Cylinders
# Available Tank Dimensions
# Supplier Information:
# http://www.rotoplast.com.co/cajones-y-canecas-industriales/
# Tank Volume | Tank Diameter | Tank Height
# This factor is based on the difference between one tank's
# volume and that of the next largest available tank. It helps the
# tank selection function below decide whether a jump to the next
# available tank is justified.
V_SupplierCoagTank := [
    66 L;
    100 L;
    120 L;
    138 L;
    175 L;
    185 L;
    200 L;
    205 L;
    216 L;
    225 L;
    236 L;
    247 L;
    266 L;
    311 L;
    326 L;
    355 L;
    509 L;
    556 L;
    700 L;
    864 L
]
Dimensions_SupplierCoagTank := [
    12 in, 36 in;
    14 in, 40 in;
    15 in, 42 in;
    16 in, 42 in;
    18 in, 42 in;
    20 in, 36 in;
    18 in, 48 in;
    20 in, 40 in;
    20 in, 42 in;
    20 in, 44 in;
    20 in, 46 in;
    20 in, 48 in;
    24 in, 36 in;
    24 in, 42 in;
    24 in, 44 in;
    24 in, 48 in;
    30 in, 44 in;
    30 in, 48 in;
    36 in, 42 in;
    40 in, 42 in
]
Factor := [1.06; 1.05; 1.04; 1.05; 1.03; 1.03; 1.01; 1.02; 1.02; 1.02; 1.02; 1.01; 1.03; 1.01; 1.03; 1.06; 1.01; 1.04; 1.04; 1.04]
# Functions to Choose Necessary Tank Size
H_Tank(V_CoagTank, V_SupplierCoagTank, Dimensions_SupplierCoagTank) :=
    i ← 0
    return Dimensions_SupplierCoagTank[:, 1][i] if V_CoagTank < V_SupplierCoagTank[i]*Factor[i] and i < last(V_SupplierCoagTank)
    otherwise
        while V_CoagTank ≥ V_SupplierCoagTank[i]*Factor[i] and i < last(V_SupplierCoagTank)
            i ← i + 1
        return Dimensions_SupplierCoagTank[:, 1][i - 1]
D_Tank(V_CoagTank, V_SupplierCoagTank, Dimensions_SupplierCoagTank) :=
    i ← 0
    return Dimensions_SupplierCoagTank[:, 0][i] if V_CoagTank < V_SupplierCoagTank[i]*Factor[i] and i < last(V_SupplierCoagTank)
    otherwise
        while V_CoagTank ≥ V_SupplierCoagTank[i]*Factor[i] and i < last(V_SupplierCoagTank)
            i ← i + 1
        return Dimensions_SupplierCoagTank[:, 0][i - 1]
# Coagulant Stock Tank Calculations
V_CoagTank := Ti_CoagStock*Q_CdcMax
H_CoagTank := H_Tank(V_CoagTank, V_SupplierCoagTank, Dimensions_SupplierCoagTank) = 1.0668 m
R_CoagTank := D_Tank(V_CoagTank, V_SupplierCoagTank, Dimensions_SupplierCoagTank)/2 = 0.3048 m
Z_CoagTank := Z_EtTop + H_CoagTankAboveHeadTank + HL_ChemDoserMin - B_StockOutlet  # The vertical position of the base of the coagulant tank is the
# Chlorine Stock Tank Calculations
C_ChlorineDoseMax = 2 mgm/L
Ti_ChlorineStock = 1.25 day
C_ChlorineStock = 50 gm/L
Q_ChlorineMax := Q_Plant*C_ChlorineDoseMax/C_ChlorineStock = 0.00048 L/s  # 2mg/L * Q.Plant=50gram/L*Q.Stock
# Not sure where the max and stock conc. are from - akta
# Old method of calcuating the stock tank sizes.
V_ChlorineTank := Ti_ChlorineStock*Q_ChlorineMax = 51.84 L
H_ChlorineTank := H_Tank(V_ChlorineTank, V_SupplierCoagTank, Dimensions_SupplierCoagTank)
R_ChlorineTankOld := (V_ChlorineTank/(2*π*Ratio_HeightToDiameterStockTank))^(1/3) = 0.176522 m
H_ChlorineTankOld := Ratio_HeightToDiameterStockTank*2*R_ChlorineTank = 0.4572 m
R_ChlorineTank := D_Tank(V_ChlorineTank, V_SupplierCoagTank, Dimensions_SupplierCoagTank)/2
