# [reference: BasicInputs.xmcd]
# [reference: ExpertInputs.xmcd]
# [reference: MathFunctions.xmcd]
# [reference: PipeDatabase.xmcd]
# [reference: FluidsFunctions.xmcd]
# [reference: SedimentationTank.xmcd]
# [reference: Flocculator.xmcd]
# [reference: LFOM.xmcd]
# [reference: EntranceTank.xmcd]
# [reference: StackedRapidSandFilter.xmcd]
# [reference: LinearCdc.xmcd]
# Chemical Stock Tanks
# Available Tank Dimensions
# Supplier Information:
# http://www.rotoplas.com/assets/files/industria/catalogo.pdf
# Tank Volume | Tank Diameter | Tank Height
Vol_SupplierChemTank := [208.198 L; 450 L; 600 L; 750 L; 1100 L; 2500 L]
Dimensions_SupplierChemTank := [22.5 in, 33.5 in; 0.85 m, 0.99 m; 0.96 m, 1.10 m; 1.10 m, 1.02 m; 1.10 m, 1.39 m; 1.55 m, 1.65 m]
Factor := [1.05; 1.05; 1.05; 1.05; 1.05; 1.05]
# Coagulant Stock Tank Calculations
Vol_CoagTank := CeilNearest(Ti_CoagStock*Q_CoagStock, Vol_SupplierChemTank) = 600 L
R_CoagTank := Dimensions_SupplierChemTank[:, 0][index(Vol_CoagTank, Vol_SupplierChemTank)]/2 = 0.48 m
H_CoagTank := Dimensions_SupplierChemTank[:, 1][index(Vol_CoagTank, Vol_SupplierChemTank)] = 1.1 m
# The vertical position of the coagulant tank must be high enough to provide enough hydraulic head to achieve the desired maximum chemical flow rate through the float valve orifice entering the constant head tank. This distance is given by H.CoagTankAboveHeadTank, and is added to the elevation of the water level in the constant head tank to find the elevation of the stock tank outlet.
#
# The elevation of the water level in the constant head tank is a height H.DoserAssembly above the top of the entrance tank wall. This height depends on the hardware used to mount the lever arm, which dictates the level of the end of the dosing tube at zero flow and therefore the CHT elevation. Here a conservative (large) estimate of this height should be used to ensure the system has sufficient hydraulic head.
#
# The actual bottom of the stock tank is a height B.StockOutlet below the outlet to provide space for solids to settle in the bottom of the tank.
#
# See the dimensioned diagram below.
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# Chlorine Stock Tank Calculations
Vol_ChlorineTank := CeilNearest(Ti_ChlorineStock*Q_ChlorStock, Vol_SupplierChemTank) = 208.198 L
R_ChlorineTank := Dimensions_SupplierChemTank[:, 0][index(Vol_ChlorineTank, Vol_SupplierChemTank)]/2 = 0.28575 m
H_ChlorineTank := Dimensions_SupplierChemTank[:, 1][index(Vol_ChlorineTank, Vol_SupplierChemTank)] = 0.8509 m
# Filter Coagulant Stock Tank Calculations
Vol_FiCoagTank := CeilNearest(Ti_FilterCoagStock*Q_FiCoagStock, Vol_SupplierChemTank) = 208.198 L
H_FilterCoagTank := Dimensions_SupplierChemTank[:, 1][index(Vol_FiCoagTank, Vol_SupplierChemTank)]
R_FilterCoagTank := Dimensions_SupplierChemTank[:, 0][index(Vol_FiCoagTank, Vol_SupplierChemTank)]/2
H_FilterCoagTank := H_ChlorineTank
# Defined to allow for mirroring of plumbing code to work even when filter coagulant tanks should be a size smaller (51 L/s to 54 L/s). Should be changed once the functions determining size of the chlorine tanks and the filter coagulant tanks are more properly defined; this will require the code for the plumbing from the two sets of tanks to be coded individually instead of the currently used mirror function.
R_FilterCoagTank := R_ChlorineTank
W_EtChemPlatform := max(4*(R_CoagTank + T_ChemTankWall) + 3*S_ChemTankBorder, 4*(R_FilterCoagTank + T_ChemTankWall) + 2*S_ChemTankBorder + W_HumanMin, 4*(R_ChlorineTank + T_ChemTankWall) + 2*S_ChemTankBorder + W_HumanMin)
L_EtChemPlatform := max(2*R_CoagTank + 4*R_FilterCoagTank + 6*T_ChemTankWall + 4*S_ChemTankBorder, 2*R_CoagTank + 4*R_ChlorineTank + 6*T_ChemTankWall + 4*S_ChemTankBorder)
