# [reference: BasicInputs.xmcd]
# [reference: ExpertInputs.xmcd]
# [reference: DesignAssumptions.xmcd]
# [reference: MathFunctions.xmcd]
# [reference: PipeDatabase.xmcd]
# [reference: MinorLossCoefficients.xmcd]
# [reference: FluidsFunctions.xmcd]
# [reference: Sedimentation Tank.xmcd]
# [reference: Floc Hopper - New Design.xmcd]
# [reference: FCM.xmcd]
# [reference: Flocculator 3.xmcd]
# [reference: Rapid Mix.xmcd]
# [reference: Materials List.xmcd]
# [reference: ChemStorageCylinders.xmcd]
# FIXED INPUT PARAMETERS FOR THE DOSER
# INPUT PARAMETERS FOR Non-Linear CDC Arm:
# total plant head loss
HL_PlantTotal = 0.5 m
HL_ChemDoserMin = 0.4 m
# From Expert inputs. Min to have good control of dose. Lever must be sized so that the float side is longer if the actual plant head loss is greater than the target head loss for the chemical doser.
ε_tube1 := .000001 mm
# Input tubing roughness for tube 1
#
# Input tubing roughness for tube 2
#
# Input tubing 1's length
#
# Input tubing 2's length
#
# Input tubing 1's diameter
#
# Input tubing 2's diameter
#
# Input viscosity of alum solution
#
# Input density of water
#
# Input density of alum solution
ε_tube2 := .000001 mm
L_tube1 := 50 cm
L_tube2 := 50 cm
Diameter_tubing1 := 3/8*in
Diameter_tubing2 := 3/8*in
ν_alum := 1.1*10^-6*m^2/s
Al := 27*gm/mol
S := 32.064*gm/mol
O := 16*gm/mol
H := 1.008*gm/mol
MW_alum := 2*Al + 3*(S + 4*O) + 14.3*(2*H + O)
MW_AlOH3 := Al + 3*(O + H)
ρ_H2O := 1000*kg/m^3
ρ_Alum(C_Alum) := 1*gm/cm^3/(-2.308*10^-3*L/gm*MW_Al2O3/MW_alum*C_Alum + 1.012)
# This is from Gurevich, R.A. A study of density and viscosity of aluminum sulfate solution.
# Applicable up to solubility limit
# This is the densityof an alum solution based on the concentration of alum
# CONCENTRATION RANGES
C_DoserScaleAlumMax := [20; 40; 80]*mg/L
ρ_Alum(C_AlumStock) = 1036.37 kg/m^3
# This is a three scaled doser
# SURFACE TENSION
σ := 0.074*N/m  # at 20 degrees C
# create a range of possible orifice diameters
d_orifices := .1 mm, .2 mm .. 15 mm
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Δh_SurfaceTension(d) := 4*σ/(ρ_Alum(C_AlumStock)*g*d)  # height required to form droplets
ρ_Alum(C_AlumStock) = 1036.37 kg/m^3
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# TRIPLE SCALE CALCULATIONS
# LEVER ARM DIMENSIONS
L_lever := 1 m  # This is the length of the lever arm Needs to be calculated based on actual plant head loss.
# Need different lengths of the lever on the two sides of the pivot point.
L_back := L_lever/2
# This is the maximum angle of the lever arm at max plant flow
Max_Angle := asin(HL_ChemDoserMin/L_back)
Max_Angle = 53.1301 deg  # This is the maximum angle the lever arm will have, at max plant flow
# This is the ratio of flows for a single orifice. Each of these flows will will have a label on the scale on the lever arm.
Pi_CdcFlowScale := [0.4; 0.5; 0.6; 0.7; 0.8; 0.9; 1]
# These are the head losses for each of the set dosages on the sliding scale
HL_CdcScaleOrifice := HL_ChemDoserMin*Pi_CdcFlowScale^2 = [6.4; 10; 14.4; 19.6; 25.6; 32.4; 40] cm
Q_Plant*C_DoserScaleAlumMax/C_AlumStock = [200; 400; 800] mL/min
i := 0 .. last(C_DoserScaleAlumMax)
D_CdcAlumOrifices[i] := RoundNearest(sqrt(4*Q_Plant*C_DoserScaleAlumMax[i]/(C_AlumStock*(π*Pi_VenaContractaOrifice)))/(2*g*HL_ChemDoserMin)^(1/4), D_Drill)
D_CdcAlumOrifices = [1.6; 2.2; 3.1] mm
# MINIMUM PLANT FLOW (accounting for surface tension)
# Purpose: to find the angle/flow rate where the first point starts to be affected by surface tension
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# Check these equations. The goal
Δh_SurfaceTension(D_CdcAlumOrifices[0]) = 1.82026 cm
Pi_QError := 0.5  # This is a 50 percent error in alum dose when the minimum alum dose is the target
Δh_SurfaceTension(D_CdcAlumOrifices[0])/(1 - (1 - Pi_QError)^2) = 2.42702 cm
HL_PlantMin := Δh_SurfaceTension(D_CdcAlumOrifices[0])/(1 - (1 - Pi_QError)^2)*HL_PlantTotal/HL_CdcScaleOrifice[1] = 12.1351 cm
# use index 1 because the min alum dose is 10 mg/L
# HL.Orifice is the minimum head loss through the dosing orifice that will provide the target flow error
HL_PlantTotal = 0.5 m
HL_CdcScaleOrifice[0] = 0.064 m
K_plant := HL_PlantTotal*2*g/(Q_Plant^2) = 24516.6 1/m^4
Q_PlantMin := sqrt((2*g*HL_PlantMin)/K_plant) = 9.85296 L/s
Q_Plant = 20 L/s
# REQUIRED HEIGHT OF STOCK TANK
h(Q, D) := (Q/(Pi_VenaContractaOrifice*π*D^2/4))^2/(2*g)
HL_FloatValveOrifice := 30*cm  # This needs to be calculated based on the actual float valve that we select.
