# The file needs MUCH more documentation.
# [reference: BasicInputs.xmcd]
# [reference: ExpertInputs.xmcd]
# [reference: DesignAssumptions.xmcd]
# [reference: MathFunctions.xmcd]
# [reference: PipeDatabase.xmcd]
# [reference: MinorLossCoefficients.xmcd]
# [reference: FluidsFunctions.xmcd]
# [reference: Sedimentation Tank.xmcd]
# [reference: Floc Hopper - New Design.xmcd]
# [reference: Flocculator.xmcd]
# [reference: Rapid Mix.xmcd]
# We need to make this more generic now that we are also using polyaluminum chloride. Instead of alum, perhaps use coagulant.
#
# Create a step by step description of the design algorithm.
# Have the steps be hyperlinks to the appropriate section in the worksheet.
#
# The coding is convoluted and needs a simple step by step strategy.
# I didn't check all the way through the code. I want you review my comments and then work through all of the code to clean it up and give it a very concise logical solution path.
# Your variables don't follow the naming conventions from the VNG.
# QUESTIONS (11/27/10)
# 1. Should the dosing orifice sizes be calculated using orifice head loss (total - (major +minor)). Or is using the total head loss okay since major and minor head losses are negligible?
#
# 2. Not sure what to do about sizing the float. I added the file from CDC 2009 to this file (last section). The code seems like it's just checking to make sure the amount of sand added is enough so that the center of gravity is below the center of buoyancy. Would it be best to have a few float sizes that are chosen depending on the plant flow rate?
#
# 3. What is the best way to incorporate the pully system? I was thinking about just having the pully attached at the end of the lever arm so then the minimum
# Given that it is
# Description of Method:
#
# Float Valve
# - For a given float valve size, calculate the tubing diameter for the tube between the constant head tank and the dosing orifice, forcing the major head loss to be 5% of the total head loss available.
# - Choose a barbed fitting for the given tubing size.
# - Calculate the minor losses in the tube (entrance loss and loss through the barbed fitting).
# - Calculate the actual amount of head loss available for the orifice.
#
# Scale + Dosing Orifice
# - Calculate the length of the dosing side of the lever arm
# - Calculate the maximum coagulant flow rates using the dosing head loss available and the ratio of flows for a single orifice along the dosing arm
#
# Surface Tension + Minimum Plant Flow Calculations
# - Determine the coagulant density
# - Determine the minimum height required to overcome surface tension
# - Determine the minimum plant flow needed to reduce errors associated with surface tension
#
# Float Size Calculations
# FIXED INPUT PARAMETERS FOR THE DOSER
# INPUT PARAMETERS FOR Non-Linear CDC Arm:
# total plant head loss
HL_PlantTotal = 0.408202 m
# From Expert inputs. Min to have good control of dose. Lever must be sized so that the float side is longer if the actual plant head loss is greater than the target head loss for the chemical doser.
HL_ChemDoserMin = 0.4 m
# Need a sketch to show what tubes you are referring to.
# Tubing between constant head tank and dosing orifices:
E_Tube := 0.1 mm  # Tubing Roughness
L_Tube := 70 cm  # Length of tubing between constant head tank and dosing orifice.
# From McMaster Carr website
# Tubing diameters | Barbed fittings corresponding to the tubing diameters.
D_Available := [0.125; 0.25; 0.375; 0.5; 0.625; 0.75; 1]*in
D_BarbAvailable := [0.075; 0.14; 0.25; 0.36; 0.497; 0.61; 0.728]*in
nu_Coagulant := 1.004*10^-6*m^2/s  # approxiamately equal to the kinematic viscosity of water at 20C
# Coagulant = alum for these calculations
C_CoagulantMinDose = 8 mgm/L
# make the minimum dose an expert input. the min needs to be 4 or 8 mg/L because of the relationships
# of the scale (2X between each scale, spaced in intervals based on Q proportional to h^1/2
# This is a three scaled doser
C_DoserScaleMax := [C_CoagulantMinDose*2.5; C_CoagulantMinDose*2.5*2; C_CoagulantMinDose*2.5*4] = [20; 40; 80] mgm/L
# Maximum concentrations of alum for each of the scales.
# LEVER ARM AND DOSING SCALE CALCULATIONS
# LEVER ARM DIMENSIONS
Angle_Max := 60 deg  # This is the maximum angle the lever arm will have, at max plant flow
# Vertical distance the float moves, and also the vertical distance the lever arm moves.
HL_PlantTotal = 0.408202 m
L_CdcLeverAttach := HL_PlantTotal/sin(Angle_Max) = 0.471351 m  # Where the pully wire will attach to along the lever arm
L_CdcLeverScale := HL_ChemDoserMin/sin(Angle_Max) = 0.46188 m
# How long to make the scale so that at the highest dosage on the scale, the minimum head loss is achieved.
L_CdcLeverOrifice := Ceil(max(L_CdcLeverAttach, L_CdcLeverScale)/m, .5)*m = 0.5 m
L_CdcLeverArm := 0.5 m  # Round length up to an even number.
EN_CdcLever := asin(HL_ChemDoserMin/L_CdcLeverArm) = 53.1301 deg
# This is the ratio of flows for a single orifice. Each of these flows will will have a label on the scale on the lever arm.
Pi_CdcFlowScale := [0.4; 0.5; 0.6; 0.7; 0.8; 0.9; 1]
HL_CdcScaleOrifice := HL_ChemDoserMin*Pi_CdcFlowScale^2 = [6.4; 10; 14.4; 19.6; 25.6; 32.4; 40] cm
# These are the head losses for each of the set dosages on the sliding scale
# Distances from the pivot point on doser arm.
DoserScale := HL_CdcScaleOrifice/EN_CdcLever = [6.90179; 10.7841; 15.529; 21.1367; 27.6072; 34.9403; 43.1362] cm
# These are the proposed labels that would be placed on the scale. The operator would then multiply these numbers times 1, 2, or 4 depending on which orifice is being used.
DoseScale[0] := Pi_CdcFlowScale*C_DoserScaleMax[0] = [8; 10; 12; 14; 16; 18; 20] mgm/L
# FLOAT VALVE SELECTION + DOSING ORIFICE CALCULATIONS
# Calculating Appropriate Float Sizes
# I corrected the diameter to be 0.25in instead of 0.025in.
Float := [0.093 in, .25 in, "Barb"; 0.187 in, 0.5 in, "NPT"; 0.25 in, 0.5 in, "NPT"; 0.312 in, 0.5 in, "NPT"]
i := 0 .. rows(Float) - 1
D_FloatOrifice[i] := Float[i, 0]
D_FloatOrifice = [0.093; 0.187; 0.25; 0.312] in
HL_StockMax := 30 cm  # max headloss between stock tanks and constant head tank.
# This needs a name consistent with the VNG.
Q_FloatOrificeMax := Q_orifice(D_FloatOrifice, HL_StockMax, Pi_VenaContractaOrifice) = [6.59099; 26.6482; 47.6283; 74.1813] mL/s
# Calculate Highest Coagulant Flow Rates
Q_Plant := 150*L/s  # Add this here to make it easy to test your design for different flow rates
C_CoagulantStock = 120 gm/L  # Coagulant stock concentration is a user input.
Q_CoagulantMax := Q_Plant*C_DoserScaleMax/C_CoagulantStock
Q_CoagulantMax = [25; 50; 100] mL/s
# Choose Stock Tank Float depending on highest coagulant flow needed.
# Find the float that will be able to supply the maximum coagulant flow.
Q_Float := CeilNearest(Q_CoagulantMax[last(Q_CoagulantMax)], Q_FloatOrificeMax) = 74.1813 mL/s
# Find the index of this float in the matrix to find the diameter of the float.
index_Float := index(Q_Float, Q_FloatOrificeMax) = 3
D_FloatOrifice := D_FloatOrifice[index_Float] = 0.312 in
# With the chosen float, calculated the diameter of the tubing from the constant head tank to the dosing orifice so that the major losses are 5% of the total head loss available.
D_Tube := D_pipe(Q_Float, D_Available, HL_ChemDoserMin/20, L_Tube, nu_Coagulant, E_Tube, 1) = 0.75 in
# Find the index of the diameter chosen from the available diameters matrix to find the corresponding barbed fitting.
index_tube := index(D_Tube, D_Available) = 5
D_Barb := D_BarbAvailable[index_tube] = 0.61 in
# Calculate the area of the tube and the barbed fitting.
Area(D) := π*D^2/4
A_out := Area(D_Tube) = 0.441786 in^2
A_in := Area(D_Barb) = 0.292247 in^2
# Calculate Minor Loss Coefficients (from the barbed fitting exit loss and from entrance loss)
K_ex := (A_out/A_in - 1)^2 = 0.261827  # Exit loss from the barbed fitting to the dosing tube.
K_ent1 := 0.5  # entrance loss to the tube defined based on the velocity in the fitting.
# Translate the entrance loss coefficient in the barbed fitting to be in the tube.
K_ent := (A_out/A_in)^2*K_ent1 = 1.1426
# Total Minor Loss Coefficient:
K_minor := K_ex + K_ent = 1.40443
# Calculate the total major and minor head loss using the total head loss fluids function.
h_lArray(Q, D, L, K, ν, E) :=
    for i ∈ 0 .. last(Q)
        h_lArray[i] ← h_l(Q[i], D, L, K, ν, E)
    return h_lArray
HL_CdcDosingtube := h_lArray(Q_CoagulantMax, D_Tube, L_Tube, K_minor, nu_Coagulant, E_Tube)
HL_CdcDosingtube = [1.10518; 4.98656; 18.3714] mm
# The total head loss available for the orifice:
HL_Orifice := HL_ChemDoserMin - HL_CdcDosingtube = [0.398895; 0.395013; 0.381629] m
D_CdcOrificeArray(HL_ChemDoserMin, Q, D, L, K, ν, ε) :=
    for i ∈ 0 .. last(Q)
        HL_Orifice[i] ← HL_ChemDoserMin - h_l(Q[i], D, L, K, ν, ε)
        D_CdcOrifice[i] ← RoundNearest((4*Q[i]/(π*Pi_VenaContractaOrifice*(2*g*HL_Orifice[i])^(1/2)))^(1/2), D_Drill)
    return D_CdcOrifice
D_CdcOrifice := D_CdcOrificeArray(HL_ChemDoserMin, Q_CoagulantMax, D_Tube, L_Tube, K_minor, nu_Coagulant, E_Tube)
# Dosing orifice diameters for given flow rate.
D_CdcOrifice = [4.3; 6; 9] mm
i := 0 .. last(D_CdcOrifice)
Q_CdcOrificeActual[i] := Q_orifice(D_CdcOrifice[i], HL_Orifice[i], Pi_VenaContractaOrifice)
Q_CdcOrificeActual = [25.1839; 48.7939; 107.91] mL/s
Q_CoagulantMax = [25; 50; 100] mL/s
Error := (Q_CdcOrificeActual - Q_CoagulantMax)/Q_CoagulantMax = [0.735607; -2.41224; 7.91018] %
# Check the errors that we get with this design. Given the actual orifice sizes and the actual head loss, calculate the actual flow rates for the 3 scales.
# Now specify the float valve and tubing sizes given a plant flow rate
# I deleted all of the calculations that were below. They weren't actually used in the design.
# The minimum plant flow calculation is unnecessary. If the plant flow rate decreases substantially we may need to be prepared to dilute the stock concentration and increase the plant head loss (or move the cable attachment point on the lever to get more vertical travel).
