# Design "Cheat Sheet"
# This worksheet is intended to facilitate proper use of various functions and adherence to coding conventions and variable naming. This will be most helpful when modifying drawing files, but the variable naming guide should also be followed when working on design files.
# Variable Naming Guide
# The list below is the list names that can be used before the period for the subscript in our variable names.
# Major Plant Components. These items follow the period in the variable name
[
    "Subscripts", "";
    "component key", "Description";
    "Et", "Entrance tank";
    "Lfom", "Linear flow orifice meter";
    "Rm", "Rapid mix";
    "Floc", "Flocculation tank";
    "Sed", "Sedimentation tank";
    "Fi", "Stacked Rapid Sand Filter"
]
[
    "Symbol", "Description", "Dimensions";
    "Amp", "amplitude", "L";
    "B", "perpendicular distance between components (center to center)", "L";
    "D", "Diameter", "L";
    "E", "pipe roughness", "L";
    "FB", "Freeboard", "L";
    "H", "height (includes freeboard)", "L";
    "HL", "head loss", "L";
    "HW", "local water depth", "L";
    "ID", "inner diameter", "L";
    "L", "length", "L";
    "Loc", "Locations", "L";
    "ND", "nominal diameter", "L";
    "OD", "outer diameter", "L";
    "R", "Radius", "L";
    "S", "space between components", "L";
    "T", "thickness", "L";
    "W", "width", "L";
    "Z", "elevation relative to bottom of sed tank", "L";
    "ZW", "water depth relative to bottom of sed tank", "L";
    "V", "velocity", "L/T";
    "CP", "Collision Potential", "L^(2/3)";
    "A", "Area", "L^2";
    "Nu", "kinematic viscosity", "L^2/T";
    "ED", "energy dissipation rate", "L^2/T^3";
    "Vol", "volume", "L^3";
    "Q", "flow", "L^3/T";
    "MW", "Molecular weight", "M";
    "C", "Concentration", "M/L^3";
    "Rho", "Density", "M/L^3";
    "AN", "angle", "radians";
    "Ti", "time", "T";
    "EN", "Enumerated type", "dimensionless";
    "N", "Number", "dimensionless";
    "Pi", "dimensionless geometric ratio", "";
    "AC", "AutoCAD command string", "";
    "K", "minor loss coefficient", ""
]
# Examples of properly named variables:
# W_FlocChannelMin | minimum width of a flocculator channel
# L_SedUpflowMax | maximum sedimentation tank upflow length
V_SedActiveUp
# upflow velocity of the active area of the sedimentation tank
# AN_SedPlate | angle of the sedimentation tank plate settlers
# ND_FiTrunk | nominal diameter of the filter trunk lines
# Frequently Used Functions
# For each function, the function with its required inputs along is shown in yellow and followed by an example from a design or drawing file.
# From PlumbingF
PipeF(OriginPoint, Length, AngleVector, ND, EN)
PipeF(SedLaunderPipe_Origin, L_SedLaunder, [0; 180]*deg, ND_SedLaunder, PS_Default)
# **All other SUBF functions act just as PipeSUBF in comparison to PipeF; that is, when calling a SUBF function, you add a matrix with the layers from which you want to subtract to a call to the regular F function.
PipeSUBF(OriginPoint, Length, AngleVector, ND, EN, SubtractionLayers)
PipeSUBF(SedManPipe_Origin, L_SedManifoldPipe, [0; 180]*deg, ND_SedManifold, PS_Default, ["SedTankCon"])
ElbowF(OriginPoint, AngleVector, ND, EN)
ElbowF(SedHopperDrainElbow_Origin, [90; 0; 45]*deg, ND_SedHopperDrain, PS_Default)
# From MtoATranslatorsWrapped
BoxF(OriginPoint, FarCorner, AngleVector)
BoxF([
    Plant_Origin[0];
    Plant_Origin[1] + W_SedBay/2 - ConRadius(ND_SedManifold);
    Z_SedManifoldPipe - ConRadius(ND_SedManifold)
], [
    Plant_Origin[0] - SocketDepth(ND_SedManifold) - CapThickness(ND_SedManifold);
    Plant_Origin[1] + W_SedBay/2 + ConRadius(ND_SedManifold);
    Z_SedManifoldPipe - ConRadius(ND_SedManifold) - T_ConcreteMin
], [0; 0; 0]*deg)
CylinderF(OriginPoint, Radius, Length, AngleVector)
CylinderF([
    Et_Origin[0] - L_Et - T_PlantWall + D_LATeetoLAOrigin + L_CdcFloatArm - D_LeverHole;
    LA_Origin[1] + W_LeverArm/2;
    Z_FloatTop
], D_Cable, L_Cable, [0; 90]*deg)
# From MtoATranslators
UnionMultiple(PointArray)  # **only used within drawing functions
Union_All
# **You can simply add this in any stack; there's no need to define it as something else beforehand.
# **Insert "GroupDelete" into a stack as a step to delete an object or several objects from a layer. Previously, GroupAll("DeleteMe") was inserted into stacks but this is being changed for simplicity's sake.
GroupDelete := GroupAll("DeleteMe")
Mirror3dAll(Plane, ReflectionPoint, Erase)
# **Erase is asking whether or not you want to erase the original object or objects you are mirroring. Put "n" for no and "y" for yes.
Mirror3dAll("yz", [Fi_origin[0] - L_Fi/2; 0 m], "n")
Mirror3dLast(Plane, ReflectionPoint, Erase)
Mirror3dLast("zx", [Plant_Origin[0]; Plant_Origin[1] + W_SedBay - W_SedBay/2], "n")
MirrorAll(p1, p2, Erase)
MirrorAll([Plant_Origin[0]; Plant_Origin[1] + W_Sed - W_SedBay], [Plant_Origin[0] + zc; Plant_Origin[1] + W_Sed - W_SedBay], "n")
ArrayLast(nrow, ncol, dist)
ArrayLast(N_FlocChannels - 1, 1, W_FlocChannel + T_PlantWall)
ArrayLastPolar(RotationPoint, NumItems, Angle)
ArrayLastPolar([
    RMElbow_Origin[0];
    RMElbow_Origin[1] + ElbowRadius(ND_RMPipe);
    ZW_Et - HL_Flowmeasure + H_LfomOrifices[h]
], N_LfomOrifices[h], (N_LfomOrifices[h] - 1)*(2*asin(D_LfomOrifices/(2*outerradius(ND_RMPipe))) + 2*asin(S_LfomOrificesMin/(2*outerradius(ND_RMPipe)))))
ArrayMultiple(PointArray, nrow, ncol, drow, dcol)
ArrayMultiple([BaffleSlot1_Origin], N_FlocChannels - 1, ceil(N_FlocChannelBaffles[0]/2), -W_FlocChannel - T_PlantWall, 2*B_FlocBaffle[0])
Rotate3DLast(RotationPoint, axis, angle)
Rotate3DLast([
    FiSandDrainPipe_Origin[0] - (B_FiManifoldBranch + T_FiWall + 2*ValveLength(ND_FiSandOutlet)) - (ValveLength(ND_FiSandOutlet) - ValveSocket(ND_FiSandOutlet))/sqrt(2);
    FiSandDrainPipe_Origin[1];
    Fi_origin[2] + H_FiSandOutlet - (ValveLength(ND_FiSandOutlet) + ValveSocket(ND_FiSandOutlet))/sqrt(2) + 2*outerradius(ND_FiManBranch) - (ValveLength(ND_FiSandOutlet) - ValveSocket(ND_FiSandOutlet))/sqrt(2)
], "y", -45 deg)
layer_new(title, color)
# **When creating new layers, be sure to stick to naming conventions. See the guide at the top of this sheet and be sure to check for other examples in the code if you're not sure what to name your layer. Shorten names when possible, i.e. "Plumbing" should be "Plu", "Concrete" should be "Con", etc.
#
# Also, refer to the top of MtoATranslators for possible layer colors. Use the proper color for the layer you are creating: pipes are blue, fittings are green, etc. Look at related files to determine what color the layer you're creating should be. If you're coding something that is totally different than anything currently coded into the design tool, feel free to use a new color.
EntTankLayer := layer_new("EtCon", grey)
SelectLayer(LayerName)
SelectRMPipes := SelectLayer("EtRmPipePlu")
FreezeLayer(LayerName)
FreezeDrainCouplings := FreezeLayer("EtDrainCouplingsPlu")
ThawMultiple(LayerVector)
ThawDrains := ThawMultiple(["EtCon"; "EtDrainCouplingsPlu"; "EtDrainPipesPlu"; "EtWeir"; "EtTrashrack"; "Cdc"; "CdcFittings"; "EtDrainStoppersPlu"])
FreezeMultiple(LayerVector)
SubtractF(GroupsToSubtractFrom, GroupToSubtract)
SubtractTrashRackSlots := SubtractF(["EtCon"], "DeleteMe")
insertdwg(filepath, insertionpoint, Xscalefactor, Yscalefactor, AN_rotation)
# **Note that we no longer insert drawings from our repositories; instead, we have all of our drawings on the wiki and thus anyone can use our scripts to draw our plants or components of our plants. If you ever create a drawing that is to be inserted in the plant drawing, you need to both commit it to our repositories and to upload it to the wiki here: https://confluence.cornell.edu/display/AGUACLARA/Inserted+Drawings
insertdwg("https://confluence.cornell.edu/download/attachments/173604905/Floc-Scaled-Gate-Valve-Threaded.dwg", FlocValve_Origin, D_FlocScale, D_FlocScale, 0 deg)
