# Enclosed Stacked Rapid Sand Filter
# Dimensions and pipe sizes
N_Fi =  # error: This variable is undefined.  # Always assume two filters
H_FiLayerLow := 0.2 m
ND_FiPipeArray := [12; 18; 24; 30; 36]*in
ND_FiPipe := ND(CeilNearest(D_circle(Q_Fi/V_FiBw), AvailID(SDR_26)), SDR_26)
ND_FiManTrunkMinLow := 1.5 in
N_FiManBranchLow := 6  # number of branches on either side
N_FiInletPipesLow := 4
ND_BallValve := 3 in
ND_FiManBranchMinLow := 1 in
N_FiOutletPipesLow := 3
ND_BedTester := 1/2*in
ND_FiBwTrunkMinLow := 2 in
ND_BedTesterOuter := 1 in
ND_FiBwBranchMinLow := 1 in
ND_FiAirRelValve := 1/2*in
A_Fi := ID(ND_FiPipe, SDR_26)^2/4*π
# Layer thickness as function of trunk diameter
# round up to the nearest cm to make construction easier
H_FiLayerF(ND_Trunk) := max(H_FiLayerLow, Ceil(OR(ND_Trunk) + S_FiTrunkMin, 1 cm), Ceil(OD_Fitting(ND_Trunk), 1 cm), Ceil(FerncoOuterDiameter(ND_Trunk), 1 cm))
H_FiBottomLayerF(ND_Trunk, ND_BwTrunk) := max(H_FiLayerLow, Ceil(OR(ND_Trunk) + OR(ND_BwTrunk) + S_FiTrunkMin, 1 cm), Ceil(OR_Fitting(ND_Trunk) + OR_Fitting(ND_BwTrunk), 1 cm), Ceil(FerncoOuterDiameter(ND_Trunk)/2 + FerncoOuterDiameter(ND_BwTrunk)/2, 1 cm))
# There are three flow distribution problems in the filter design: distribution between the slots along a manifold branch, distribution between branches along a trunk, and distribution between filter layers. The first two are both addressed by making pressure recovery in the manifold (both trunks and branches) small relative to the short path head loss (head loss through the clean bed, since slot head loss in forward filtration is small). In backwash mode where there is no bed head loss, the pressure recovery in the manifold plumbing must be small relative to slot head loss.
#
# Head loss through the inlet and outlet plumbing differs for different layers both because the number of elbows varies and because the top and bottom inlets have 1/2 the flow of the middle two. Therefore good flow distribution between layers would be addressed by making head loss through the inlet and outlet plumbing small for all layers relative to clean bed head loss. We do not have an explicit constraint set for this, but the constraint on trunk diameter which gives good flow distribution within the manifolds seems to be sufficient to take care of it. As a check, see the analysis under the section "Path Head Loss Calculations and Flow Distribution Between Layers" below.
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Pi_FiManifoldQ := 0.85  # Ratio of long path flow to short path flow
Pi_FiManifoldHeadLoss := 1 - Pi_FiManifoldQ^2 = 0.2775
# Ratio of pressure recovery in the slotted pipes to the head loss through the clean bed (or through the slots in backwash mode)
# Even though the piezometric head profiles for the inlet and outlet manifolds on the middle layers may be parallel meaning that pressure recovery there need not be small for good distribution between sand bed flow paths, we still need pressure recovery to be small in the outlet manifolds in order to get good flow distribution in the top and bottom layers where the velocity in the manifolds is 1/2 and the pressure recovery 1/4 that of other layers (even smaller in the larger-diameter bottom manifold where velocity head is tiny).
# Flow distribution constraints: ratio of pressure recovery to clean bed head loss
# Filter Flow Rates and Layer Height
Q_FiMax := V_FiBw*A_Fi = L/s
N_Fi =  # error
Q_Fi =  # error  # The flow will be divided evenly between the N_Fi = filters.
A_FiActive := A_Fi
Q_FiLayer := Q_Fi/N_FiLayer = L/s  # This is the flow rate through each filter layer
Q_FiBw := V_FiBw*A_Fi = L/s
H_FiLayer := H_FiLayerF(ND_FiManTrunkMinLow)
# Filter Trunk and Branch Diameters
Q_FiBwBranchMax := Q_FiBw/(2*N_FiManBranchLow)
Q_FiBranchMax := 2*Q_FiLayer/(2*N_FiManBranchLow)
A_FiBranchMin := ID(ND_FiManBranchMinLow, SDR_26)^2*π/4
A_FiBwBranchMin := ID(ND_FiBwBranchMinLow, SDR_26)^2*π/4
V_FiManBranchEst := Q_FiBranchMax/A_FiBranchMin
V_FiBwManBranchEst := Q_FiBwBranchMax/A_FiBwBranchMin
PR_FiManBranchEst := V_FiManBranchEst^2/(2*g)
PR_FiBwManBranchEst := V_FiBwManBranchEst^2/(2*g)
# First constraint: pressure recovery in trunks during forward filtration
HL_FiCleanLayerMin := h_lKozeny(H_FiLayer, D_FiSand60, Q_FiLayer/A_Fi, ε_FiSand, Nu_Water)
PR_FiManMax := HL_FiCleanLayerMin*Pi_FiManifoldHeadLoss
V_FiManTrunkMaxPR := sqrt(2*g*(PR_FiManMax - PR_FiManBranchEst))
ND_FiManTrunkLow := max(ND_FiManTrunkMinLow, ND(CeilNearest(D_circle(2*Q_FiLayer/V_FiManTrunkMaxPR), AvailID(SDR_26)), SDR_26))
PR_FiTrunk := (2*Q_FiLayer/(ND_FiManTrunkLow^2*π/4))^2/(2*g)
PR_FiManBranchMax := PR_FiManMax - PR_FiTrunk
V_FiManBranchMax := sqrt(2*g*PR_FiManBranchMax)
ND_FiManBranchLow := max(ND_FiManBranchMinLow, ND(CeilNearest(D_circle(2*Q_FiLayer/(2*N_FiManBranchLow)/V_FiManBranchMax), AvailID(SDR_26)), SDR_26))
PR_FiManBranch := (2*Q_FiLayer/(2*N_FiManBranchLow)/(ID(ND_FiManBranchLow, SDR_26)^2*π/4))^2/(2*g)
PR_FiManTotal := PR_FiTrunk + PR_FiManBranch
PR_FiManMax =  # error
# Second constraint: pressure recovery in lowest trunk during backwash
HL_FiBwSlotsEst := 10 cm
PR_FiBwManMax := HL_FiBwSlotsEst*Pi_FiManifoldHeadLoss = 2.775 cm
V_FiBwManTrunkMaxPR := sqrt(2*g*(PR_FiBwManMax - PR_FiBwManBranchEst))
ND_FiBwTrunkLow := max(ND_FiBwTrunkMinLow, ND(CeilNearest(D_circle(Q_FiBw/V_FiBwManTrunkMaxPR), AvailID(SDR_26)), SDR_26))
PR_FiBwTrunk := (Q_FiBw/(ID(ND_FiBwTrunkLow, SDR_26)^2*π/4))^2/(2*g)
PR_FiBwManBranchMax := PR_FiBwManMax - PR_FiBwTrunk
V_FiBwManBranchMax := sqrt(2*g*PR_FiBwManBranchMax)
ND_FiBwBranchLow := max(ND_FiBwBranchMinLow, ND(CeilNearest(D_circle(Q_FiBw/(2*N_FiManBranchLow)/V_FiBwManBranchMax), AvailID(SDR_26)), SDR_26))
PR_FiBwManBranch := (Q_FiBw/(2*N_FiManBranchLow)/(ID(ND_FiBwBranchLow, SDR_26)^2*π/4))^2/(2*g)
PR_FiBwManTotal := PR_FiBwTrunk + PR_FiBwManBranch
PR_FiBwManMax = 2.775 cm
# Assuming trunk will have a male adpater whose threading feeds through the filter wall.
L_FiManTrunk := sqrt(ID(ND_FiPipe, SDR_26)^2 - OD_Fitting(ND_FiManTrunkLow)^2) - CapThickness(ND_FiManTrunkLow)
L_FiBwManTrunk := sqrt(ID(ND_FiPipe, SDR_26)^2 - OD_Fitting(ND_FiBwTrunkLow)^2) - CapThickness(ND_FiBwTrunkLow)
L_FiManCapOffset := IR(ND_FiPipe, SDR_26) - OR_Fitting(ND_FiManBranchLow)/tan(asin(OD_Fitting(ND_FiManBranchLow)/ID(ND_FiPipe, SDR_26)))
L_FiBwManCapOffset := IR(ND_FiPipe, SDR_26) - OR_Fitting(ND_FiBwBranchLow)/tan(asin(OD_Fitting(ND_FiBwBranchLow)/ID(ND_FiPipe, SDR_26)))
S_FiBranchFromWall := max(SocketDepth(ND_FiManTrunkLow), ID(ND_FiPipe, SDR_26) - L_FiManTrunk + SocketDepth(ND_FiManTrunkLow)) + OR(ND_FiManBranchLow)
S_FiBwBranchFromWall := max(SocketDepth(ND_FiBwTrunkLow), ID(ND_FiPipe, SDR_26) - L_FiManTrunk + SocketDepth(ND_FiBwTrunkLow)) + OR(ND_FiBwManBranch)
B_FiManBranch := 2*(IR(ND_FiPipe, SDR_26) - S_FiBranchFromWall)/(N_FiManBranchLow - 1)
B_FiBwManBranch := 2*(IR(ND_FiPipe, SDR_26) - S_FiBwBranchFromWall)/(N_FiManBranchLow - 1)
L_FiManBranchLow :=
    for i ∈ 0 .. N_FiManBranchLow - 1
        L[i] ←
            IR(ND_FiPipe, SDR_26)*sin(acos((IR(ND_FiPipe, SDR_26) - S_FiBranchFromWall - B_FiManBranch*i + OR_Fitting(ND_FiManBranchLow))/IR(ND_FiPipe, SDR_26))) - OR(ND_FiManTrunkLow) - CapThickness(ND_FiManBranchLow) if i < N_FiManBranchLow/2
            IR(ND_FiPipe, SDR_26) - IR(ND_FiManTrunkLow, Sch40) - L_FiManCapOffset - CapThickness(ND_FiManBranchLow) if i + 0.5 == N_FiManBranchLow/2
            L[N_FiManBranchLow - 1 - i] otherwise
    L
L_FiBwManBranchLow :=
    for i ∈ 0 .. N_FiManBranchLow - 1
        L[i] ←
            IR(ND_FiPipe, SDR_26)*sin(acos((IR(ND_FiPipe, SDR_26) - S_FiBwBranchFromWall - B_FiBwManBranch*i + OR_Fitting(ND_FiBwManBranch))/IR(ND_FiPipe, SDR_26))) - OR(ND_FiBwTrunkLow) - CapThickness(ND_FiBwManBranch) if i < N_FiManBranchLow/2
            IR(ND_FiPipe, SDR_26) - IR(ND_FiBwTrunkLow, SDR_26) - L_FiBwManCapOffset - CapThickness(ND_FiBwManBranch) if i + 0.5 == N_FiManBranchLow/2
            L[N_FiManBranchLow - 1 - i] otherwise
    L
L_FiManCouplingToFernco := SocketDepth(ND_FiManTrunkLow) + S_Fitting + FerncoCouplingLength(ND_FiManTrunkLow)/2
L_FiBwManCouplingToFernco := SocketDepth(ND_FiBwTrunkLow) + S_Fitting + FerncoCouplingLength(ND_FiBwTrunkLow)/2
# Manifold Pipe Lengths
# Inlet Orifice and Outlet Slot Design
HL_FiBwOrifice := PR_FiBwManTotal/Pi_FiManifoldHeadLoss
A_FiBwOrifices := A_orifice(HL_FiBwOrifice, Pi_VCOrifice, Q_FiBw)
L_FiManBranchLow =  # error
L_FiBwManBranchLow =  # error
A_FiManSlots := 2*A_FiBwOrifices
A_FiTopManSlots := A_FiBwOrifices
# Outlet Design
# Can B.FiManSlot be 1/16in?
B_FiManSlot := 1/16*in = 1.5875 mm
N_FiSlotRows := 2
L_FiOutletManSlotTotal := A_FiManSlots/W_FiManSlots
N_FiOutletManSlotsPerRow := floor(L_FiManBranchLow/B_FiManSlot)
N_FiOutletManSlotsPerBranch := N_FiOutletManSlotsPerRow*N_FiSlotRows
N_FiOutletSlotsTotal := 2*sum(N_FiOutletManSlotsPerBranch)
L_FiOutletManSlotCurvedInner := L_FiOutletManSlotTotal/N_FiOutletSlotsTotal
# Inlet Design
B_FiManOrificeEst := 1 cm
N_FiBwManBranchOrifices := floor((L_FiBwManBranchLow - B_FiManOrificeEst - 2*L_FiManBranchExt)/B_FiManOrificeEst)
N_FiBwManBranchOrificesMax := 2*sum(N_FiBwManBranchOrifices)
N_FiManBranchOrifices := floor((L_FiManBranchLow - B_FiManOrificeEst - 2*L_FiManBranchExt)/B_FiManOrificeEst)
N_FiManBranchOrificesMax := 2*sum(N_FiManBranchOrifices)
D_DrillFiOrifice := [1/8; 1/4]*in
D_FiBwManOrifice := CeilNearest(2*sqrt(A_FiBwOrifices/(π*N_FiBwManBranchOrificesMax)), D_DrillFiOrifice)
D_FiInletManOrifice := CeilNearest(2*sqrt(A_FiManSlots/(π*N_FiManBranchOrificesMax)), D_DrillFiOrifice)
D_FiTopManOrifice := CeilNearest(2*sqrt(A_FiTopManSlots/(π*N_FiManBranchOrificesMax)), D_DrillFiOrifice)
N_FiBwManOrifices := min(N_FiBwManBranchOrificesMax, floor(A_FiBwOrifices/(π/4*D_FiBwManOrifice^2)))
N_FiInletManOrifices := min(N_FiManBranchOrificesMax, floor(A_FiManSlots/(π/4*D_FiInletManOrifice^2)))
N_FiTopManOrifices := min(N_FiManBranchOrificesMax, floor(A_FiTopManSlots/(π/4*D_FiTopManOrifice^2)))
A_FiBwManOrifices := π/4*D_FiBwManOrifice^2*N_FiBwManOrifices
A_FiInletManOrifices := π/4*D_FiInletManOrifice^2*N_FiInletManOrifices
A_FiTopManOrifices := π/4*D_FiTopManOrifice^2*N_FiTopManOrifices
HL_FiBwOrificeForward := (Q_FiLayer/(Pi_VCOrifice*A_FiBwOrifices*ε_FiSand))^2/(2*g)
HL_FiInletManOrificeForward := (2*Q_FiLayer/(A_FiInletManOrifices*Pi_VCOrifice*ε_FiSand))^2/(2*g)
HL_FiTopManOrificeForward := (Q_FiLayer/(A_FiTopManOrifices*Pi_VCOrifice*ε_FiSand))^2/(2*g)
HL_FiOutletSlotForward := (2*Q_FiLayer/(A_FiManSlots*ε_FiSand*Pi_VCOrifice))^2/(2*g)
HL_FiBwOrificeBw := (Q_FiBw/(Pi_VCOrifice*A_FiBwManOrifices))^2/(2*g)
# Entrance and Exit Pipe dimensions
# Entrance Pipe
ND_FilterDistribution =  # error
ND_FiManTrunkLow =  # error
ND_FiBwTrunkLow =  # error
A_InletsTotal := (π/4)*(OD_Fitting(ND_FilterDistribution)^2 + OD_Fitting(ND_FiBwTrunkLow)^2 + 3*OD_Fitting(ND_FiManTrunkLow)^2)
ND_EntranceTank := 10 in
ND_EntranceTankEstimate := ND(CeilNearest(D_circle(A_InletsTotal), AvailID(SDR_26)), SDR_26)
# Outlet Pipe
ND_OutletTank := ND_EntranceTank = 0.254 m
HL_FiExitMax := 5 cm
OD(10 in) =  # error
L_FiExitMax := 3 m
K_FiExitMax := K_PipeEnt + 2*K_El90
ND_PlantExit := ND_PipeFlow(Q_Fi, SDR_26, HL_FiExitMax, L_FiExitMax, Nu_Water, E_Pvc, K_FiExitMax)
ND_OutletDrain := 2 in
# Plant Exit
ND_PlantExit =  # error
L_Tuberia := 50 m
K_Total := 2*K_El90 + K_PipeEnt
D_Tank := ID(2 in, SDR_41)
L_Tuberia2 := 2 m
K_Total2 := 2.*K_El90 + K_PipeExit + 2
HL_Total := h_l(Q_Plant, ND_PlantExit, L_Tuberia, K_Total, Nu_Water, E_Pvc) + h_l(Q_Plant, D_Tank, L_Tuberia2, K_Total2, Nu_Water, E_Pvc)
T_FiCapBottom := 1 in
H_FiCapTop := 6 in
H_FiValve := 10 cm
H_FiBottom := 5 cm + T_FiCapBottom  # 5 cm inset from the ground
H_FiSandLow := N_FiLayer*H_FiLayerLow + OR(ND_FiManBranchLow)
H_FiSandActive := H_FiSandLow - OR(ND_FiManBranchLow)
H_FiFluidizedBed := Pi_FiFluidized*H_FiSandLow
L_FiBodyPipe := H_FiBottom + H_FiFluidizedBed + H_FiFluidizedBedToSiphon + (OD_Fitting(ND_FiBwTrunkLow) + S_Fitting)
# Sand bed head loss during steady state backwash.
HL_FiBwSS := H_FiSandLow*(Rho_FiSand - Rho_H2O)*(1 - ε_FiSand)/Rho_H2O
# The backwash head loss is almost exactly equal  to the sand bed depth. Note that this ignores losses in the plumbing.
HL_FiDirty =  # error
HL_FiTerminal := HL_FiCleanLayerMin + HL_FiDirty
HL_FiBwInitiation := HL_FiBwSF + HL_FiBwSS
ND_FiEntBoxDrain := 2 in
# How much does the filter bed over fluidize when the entrance box level lowers after backwash initiation?
H_FiFluidizedBedVariation := (HL_FiBwInitiation - HL_FiBwSS)*(A_Fi - 4*π*(OR(ND_FiManTrunkLow)^2 + OR(ND_FiEntBoxDrain)^2))/A_FiActive
# Total Sand Depth, Filter Pipe Length, Head Loss
# Plumbing Head Loss
HL_FiBwInletManifold := 1/3*h_f(Q_FiBw, ID(ND_FiBwTrunkLow, SDR_26), L_FiManTrunk, Nu_Water, E_Pvc) + h_e(Q_FiBw/(2*N_FiManBranchLow), ID(ND_FiBwBranchLow, Sch40), K_PipeEnt) + 2/3*h_f(Q_FiBw/(2*N_FiManBranchLow), ID(ND_FiBwBranchLow, Sch40), L_FiManBranchLow[0], Nu_Water, E_Pvc) + 1/3*h_f(Q_FiBw/(2*N_FiManBranchLow), ID(ND_FiBwBranchLow, Sch40), L_FiManBranchLow[2], Nu_Water, E_Pvc) + HL_FiBwOrificeForward
HL_FiFwdInletManifold(Q_Layer) := 1/3*h_f(2*Q_Layer, ID(ND_FiManTrunkLow, SDR_26), L_FiManTrunk, Nu_Water, E_Pvc) + h_e(Q_Layer/N_FiManBranchLow, ID(ND_FiManBranchLow, Sch40), K_PipeEnt) + 2/3*h_f(Q_Layer/N_FiManBranchLow, ID(ND_FiManBranchLow, Sch40), L_FiManBranchLow[0], Nu_Water, E_Pvc) + 1/3*h_f(Q_Layer/N_FiManBranchLow, ID(ND_FiManBranchLow, Sch40), L_FiManBranchLow[2], Nu_Water, E_Pvc) + HL_FiInletManOrificeForward
HL_FiFwdBotTopInletManifold(Q_Layer) := 1/3*h_f(Q_Layer, ID(ND_FiManTrunkLow, SDR_26), L_FiManTrunk, Nu_Water, E_Pvc) + h_e(Q_Layer/(2*N_FiManBranchLow), ID(ND_FiManBranchLow, Sch40), K_PipeEnt) + 2/3*h_f(Q_Layer/(2*N_FiManBranchLow), ID(ND_FiManBranchLow, Sch40), L_FiManBranchLow[0], Nu_Water, E_Pvc) + 1/3*h_f(Q_Layer/(2*N_FiManBranchLow), ID(ND_FiManBranchLow, Sch40), L_FiManBranchLow[2], Nu_Water, E_Pvc) + HL_FiTopManOrificeForward
HL_FiFwdOutletManifold(Q_Layer) := 1/3*h_f(2*Q_Layer, ID(ND_FiBwTrunkLow, SDR_26), L_FiManTrunk, Nu_Water, E_Pvc) + h_e(Q_Layer/N_FiManBranchLow, ID(ND_FiManBranchLow, Sch40), K_PipeExit) + 2/3*h_f(Q_Layer/N_FiManBranchLow, ID(ND_FiManBranchLow, Sch40), L_FiManBranchLow[0], Nu_Water, E_Pvc) + 1/3*h_f(Q_Layer/N_FiManBranchLow, ID(ND_FiManBranchLow, Sch40), L_FiManBranchLow[2], Nu_Water, E_Pvc) + HL_FiOutletSlotForward
L_LongestPath := 2*L_FiBodyPipe
HL_FiInletPlumbing1(Q_Layer) := h_l(Q_Layer, ID(ND_FiManTrunkLow, SDR_26), L_LongestPath, K_PipeEnt + 4*K_El90, Nu_Water, E_Pvc) + HL_FiFwdBotTopInletManifold(Q_Layer)
HL_FiInletPlumbing2(Q_Layer) := h_l(2*Q_Layer, ID(ND_FiManTrunkLow, SDR_26), L_LongestPath, K_PipeEnt + 5*K_El90, Nu_Water, E_Pvc) + HL_FiFwdInletManifold(Q_Layer)
# These are numbered from the top of the filter bed down. The top and bottom inlets have half the flow rate (only serve the layers below and above, respectively). The bottom inlet has the diameter of the backwash trunk.
HL_FiInletPlumbing3(Q_Layer) := h_l(2*Q_Layer, ID(ND_FiManTrunkLow, SDR_26), L_LongestPath, K_PipeEnt + 5*K_El90, Nu_Water, E_Pvc) + HL_FiFwdInletManifold(Q_Layer)
HL_FiInletPlumbing4(Q_Layer) := h_l(Q_Layer, ID(ND_FiManTrunkLow, SDR_26), L_LongestPath, K_PipeEnt + 5*K_El90, Nu_Water, E_Pvc) + HL_FiFwdBotTopInletManifold(Q_Layer)
HL_FiInletPlumbingMax(Q_1, Q_2, Q_3, Q_4) := max(HL_FiInletPlumbing1(Q_1), HL_FiInletPlumbing2(Q_2), HL_FiInletPlumbing3(Q_3), HL_FiInletPlumbing4(Q_4))
HL_FiInletPlumbingMin(Q_1, Q_2, Q_3, Q_4) := min(HL_FiInletPlumbing1(Q_1), HL_FiInletPlumbing2(Q_2), HL_FiInletPlumbing3(Q_3), HL_FiInletPlumbing4(Q_4))
HL_FiInletPlumbingAve(Q_1, Q_2, Q_3, Q_4) := (HL_FiInletPlumbing1(Q_1) + HL_FiInletPlumbing2(Q_2) + HL_FiInletPlumbing3(Q_3) + HL_FiInletPlumbing4(Q_4))/4
HL_FiBwInletPlumbing := h_l(Q_FiBw, ID(ND_FiBwTrunkLow, SDR_26), L_LongestPath, K_PipeEnt + 4*K_El90, Nu_Water, E_Pvc) + HL_FiBwInletManifold
HL_FiOutletPlumbing1(Q_Layer) := h_l(2*Q_Layer, ID(ND_FiManTrunkLow, SDR_26), L_LongestPath, K_PipeEnt + 5*K_El90 + K_TeeFlowBr, Nu_Water, E_Pvc) + HL_FiFwdOutletManifold(Q_Layer)
HL_FiOutletPlumbing2(Q_Layer) := h_l(2*Q_Layer, ID(ND_FiManTrunkLow, SDR_26), L_LongestPath, K_PipeEnt + 5*K_El90 + K_TeeFlowBr, Nu_Water, E_Pvc) + HL_FiFwdOutletManifold(Q_Layer)
HL_FiOutletPlumbing3(Q_Layer) := h_l(2*Q_Layer, ID(ND_FiManTrunkLow, SDR_26), L_LongestPath, K_PipeEnt + 5*K_El90 + K_TeeFlowBr, Nu_Water, E_Pvc) + HL_FiFwdOutletManifold(Q_Layer)
HL_FiOutletPlumbingMax(Q_1, Q_3) := max(HL_FiOutletPlumbing1(Q_1), HL_FiOutletPlumbing2(Q_1), HL_FiOutletPlumbing3(Q_3))
HL_FiOutletPlumbingMin(Q_1, Q_3) := min(HL_FiOutletPlumbing1(Q_1), HL_FiOutletPlumbing2(Q_1), HL_FiOutletPlumbing3(Q_3))
HL_FiOutletPlumbingAve(Q_1, Q_3) := (HL_FiOutletPlumbing1(Q_1) + HL_FiOutletPlumbing2(Q_1) + HL_FiOutletPlumbing3(Q_3))/3
# Path Head Loss Calculations and Flow Distribution Between Layers
HL_FiCleanLyr(Q) := h_lKozeny(H_FiLayerLow, D_FiSand60, Q/A_FiActive, ε_FiSand, Nu_Water)
HL_FiPathClean1(Q_Path) := HL_FiInletPlumbing1(Q_Path) + HL_FiCleanLyr(Q_Path) + HL_FiOutletPlumbing1(Q_Path)
HL_FiPathClean2(Q_Path) := HL_FiInletPlumbing2(Q_Path) + HL_FiCleanLyr(Q_Path) + HL_FiOutletPlumbing1(Q_Path)
HL_FiPathClean3(Q_Path) := HL_FiInletPlumbing2(Q_Path) + HL_FiCleanLyr(Q_Path) + HL_FiOutletPlumbing2(Q_Path)
HL_FiPathClean4(Q_Path) := HL_FiInletPlumbing3(Q_Path) + HL_FiCleanLyr(Q_Path) + HL_FiOutletPlumbing2(Q_Path)
HL_FiPathClean5(Q_Path) := HL_FiInletPlumbing3(Q_Path) + HL_FiCleanLyr(Q_Path) + HL_FiOutletPlumbing3(Q_Path)
HL_FiPathClean6(Q_Path) := HL_FiInletPlumbing4(Q_Path) + HL_FiCleanLyr(Q_Path) + HL_FiOutletPlumbing3(Q_Path)
HL_FiPathCleanMax(Q_1, Q_2, Q_3, Q_4, Q_5, Q_6) := max(HL_FiPathClean1(Q_1), HL_FiPathClean2(Q_2), HL_FiPathClean3(Q_3), HL_FiPathClean4(Q_4), HL_FiPathClean5(Q_5), HL_FiPathClean6(Q_6))
HL_FiPathCleanMin(Q_1, Q_2, Q_3, Q_4, Q_5, Q_6) := min(HL_FiPathClean1(Q_1), HL_FiPathClean2(Q_2), HL_FiPathClean3(Q_3), HL_FiPathClean4(Q_4), HL_FiPathClean5(Q_5), HL_FiPathClean6(Q_6))
# In reality the flow will distribute itself such that all paths have the same head loss. We will treat the average of all of the calculated path head losses as the actual complete head loss accross all paths.
HL_FiPathCleanAve(Q_1, Q_2, Q_3, Q_4, Q_5, Q_6) := (HL_FiPathClean1(Q_1) + HL_FiPathClean2(Q_2) + HL_FiPathClean3(Q_3) + HL_FiPathClean4(Q_4) + HL_FiPathClean5(Q_5) + HL_FiPathClean6(Q_6))/6
Pi_QFiLayer(Q_1, Q_2, Q_3, Q_4, Q_5, Q_6) := sqrt(HL_FiPathCleanMin(Q_1, Q_2, Q_3, Q_4, Q_5, Q_6)/HL_FiPathCleanMax(Q_1, Q_2, Q_3, Q_4, Q_5, Q_6))
# This estimate is reasonable as long as the answer is close to 1
# Guess:
Q_1 := Q_FiLayer
Q_2 := Q_FiLayer
Q_3 := Q_FiLayer
Q_4 := Q_FiLayer
Q_5 := Q_FiLayer
Q_6 := Q_FiLayer
Given
HL_FiPathClean1(Q_1) == HL_FiPathClean2(Q_2)
HL_FiPathClean2(Q_2) == HL_FiPathClean3(Q_3)
Q_1 + Q_2 + Q_3 + Q_4 + Q_5 + Q_6 == Q_Fi
HL_FiPathClean3(Q_3) == HL_FiPathClean4(Q_4)
HL_FiPathClean4(Q_4) == HL_FiPathClean5(Q_5)
HL_FiPathClean5(Q_5) == HL_FiPathClean6(Q_6)
HL_FiPath(Q) := Find(Q_1, Q_2, Q_3, Q_4, Q_5, Q_6)
Q_FiPath := HL_FiPath(Q_Fi) = L/s
HL_FiPathClean1(Q_FiPath[0]) =  # error
Q_FiLayer1 := Q_FiPath[0]
HL_FiPathClean2(Q_FiPath[1]) =  # error
Q_FiLayer2 := Q_FiPath[1]
HL_FiPathClean3(Q_FiPath[2]) =  # error
Q_FiLayer3 := Q_FiPath[2]
HL_FiCleanPath := HL_FiPathClean1(Q_FiPath[0])
HL_FiPathClean4(Q_FiPath[3]) =  # error
Q_FiLayer4 := Q_FiPath[3]
HL_FiPathClean5(Q_FiPath[4]) =  # error
Q_FiLayer5 := Q_FiPath[4]
HL_FiPathClean6(Q_FiPath[5]) =  # error
Q_FiLayer6 := Q_FiPath[5]
ND_Siphon := ND_FiBwTrunkLow
L_FiSiphonEst := 2*L_FiBodyPipe
K_FiSiphon := K_PipeEnt + 3*K_El90 + K_PipeExit
HL_FiSiphonInitiationMax := HL_FiBwSF + H_FiForwardNoSuckAir + HL_FiDirty + HL_FiBwInletPlumbing + HL_FiBwSS + HL_FiSiphonMax - H_FiSiphonNoSuckAir
HL_FiSiphonPipe := h_l(Q_FiBw, ID(ND_Siphon, SDR_26), L_FiSiphonEst, K_FiSiphon, Nu_Water, E_Pvc)
HL_FiSiphonOutlet := Headloss_weir(Q_FiBw, ID(ND_Siphon, SDR_26))
HL_FiSiphonOrifice := h_orifice(ID(ND_Siphon, SDR_26), Pi_VCOrifice, Q_FiBw)
HL_FiBwTotalSS := HL_FiBwInletPlumbing + HL_FiBwSS + HL_FiSiphonOrifice + HL_FiSiphonPipe + HL_FiSiphonOutlet
Rho_FiFluidized := Rho_H2O*ε_FiSand*Pi_FiFluidized + Rho_FiSand*(1 - ε_FiSand)/Pi_FiFluidized
# Siphon Design
# Elevations and Filter Sizing
Z_FilterEntranceExit =  # error  # Height relative to Sed Tank Floor.
Z_FilterTop := Z_FilterMax
# Z.FilterMax from Sed Tank File is the maximum height that water can leave coming out of the valve on top of the filter with the sed tank floor as a reference point
H_FiBodyWaterMax := L_FiBodyPipe + 1/2*H_FiCapTop + H_FiValve
Z_FilterConcreteDrop := Z_FilterTop - H_FiBodyWaterMax
H_FilterEntrancePipeSafety := 10 cm  # Height above freefall so that entrance tank does not overflow
H_FilterEntranceTank := H_FilterEntrancePipeSafety + HL_FiTerminal + HL_FiCleanPath
Z_FilterEntranceTankTop := Z_FilterEntranceExit + H_FilterEntrancePipeSafety
Z_FilterEntranceTankBottom := Z_FilterEntranceTankTop - H_FilterEntranceTank
Z_FilterExitTankTop := Z_FilterEntranceTankTop
Z_FilterExitTankBottom := Z_FilterEntranceTankBottom
Z_FiExitBottom := Z_FilterExitTankBottom
ZW_FiEntBwSS := Z_FilterEntranceTankBottom + H_FiBwNoSuckAir
Z_SiphonOutlet := ZW_FiEntBwSS - HL_FiBwTotalSS
Z_FiBwPipe := Z_FilterTop - H_FiValve - 1/2*H_FiCapTop - S_Fitting
W_FilterFront := 50 cm + FerncoCouplingLength(ND_FiBwTrunkLow) + MaleAdapterLength(ND_FiBwTrunkLow)  # 50 cm for filter air traps
W_FilterBack := 2*S_Fitting + ElbowRadius(ND_Siphon) + FerncoCouplingLength(ND_Siphon) + S_Fitting + OD(ND_FiPipe)
W_Filter := W_FilterFront + W_FilterBack + OD(ND_FiPipe)
L_Filter := OD(ND_EntranceTank) + OD(ND_OutletTank) + OD(ND_FiPipe)
A_FilterMin := L_Filter*W_Filter*N_Fi
# Backwash Flow Control
H_BackwashOrifice := H_FiBwNoSuckAir
Z_BackwashOrifice := Z_FilterEntranceTankBottom + H_BackwashOrifice
HL_BackwashOrifice := Z_FilterEntranceExit - Z_BackwashOrifice
A_BackwashOrifice := A_orifice(HL_BackwashOrifice, Pi_VCOrifice, Q_FiBw)
N_BackwashOrificeEst := 7
D_BackwashOrifice := CeilNearest(2*sqrt(A_BackwashOrifice/(π*N_BackwashOrificeEst)), D_Drill)
C_BackwashInlet := ID(ND_FilterDistribution, SDR_41)*π
N_MaxOrifices := C_BackwashInlet/D_BackwashOrifice
A_BackWashOrificeActual := N_BackwashOrificeEst*D_BackwashOrifice^2*π/4
Q_BackwashActual := Pi_VCOrifice*A_BackWashOrificeActual*sqrt(2*g*HL_BackwashOrifice)
# Sand Volume
N_FiMod := 7
A_Fi =  # error
L_FiSlotted1inMod := sum(L_FiManBranchLow)*2
H_FiSandLow =  # error
V_FiPlumbing := π/4*(OD(ND_FiBwTrunkLow)^2*ID(ND_FiPipe, SDR_26) + N_FiMod*OD(1 in)^2*L_FiSlotted1inMod)
V_SandTotal := (A_Fi*H_FiSandLow - V_FiPlumbing)
ρ_Sand := 88 gm/(50 mL)
M_Sand := V_SandTotal*ρ_Sand
M_SandBag := 50 lb = 22.6796 kg
N_SandBagEst := N_Fi*ceil(M_Sand/M_SandBag)
N_SandBag := ceil(1.25*N_SandBagEst)  # 25% safety factor
# Filter Stability
D_EntTubeToFilterBody := 1/2*OD(ND_EntranceTank) + 1/2*OD(ND_FiPipe)
# Center to center distance from entrance tube to
# filter body center of gravity
Vol_EntTube := (ID(ND_EntranceTank, SDR_41)^2*π/4*H_FilterEntranceTank)
Vol_FilterBodyEmpty := (OD(ND_FiPipe)^2*π/4 - ID(ND_FiPipe, SDR_26)^2*π/4)*L_FiBodyPipe
Vol_FilterBodyFull := ID(ND_FiPipe, SDR_26)^2*π/4*L_FiBodyPipe
Vol_EntTube0.25 := ID(ND_EntranceTank, SDR_41)^2*π/4*1/4*H_FilterEntranceTank
Rho_Pvc := 1.3*gm/cm^3 = 1300 kg/m^3
1/4*H_FilterEntranceTank =  # error
Mass_FilterBodyTube := Vol_FilterBodyEmpty*Rho_Pvc
Mass_FilterComponents := 4 kg
Mass_FilterBodyEmpty := Mass_FilterBodyTube + Mass_FilterComponents
Mass_FilterBodyFull := Vol_FilterBodyFull*Rho_H2O
Mass_EntTube := Vol_EntTube*Rho_H2O
Mass_EntTube0.25 := Vol_EntTube0.25*Rho_H2O
COM_FilterEmpty := ID(ND_FiPipe, SDR_41)/2 - 1/Mass_FilterBodyEmpty*Mass_EntTube*D_EntTubeToFilterBody
# Be careful - the worst case scenario WILL cause the
# filter to tip over.  The most an empty filter can bear is 1/3 of the total entrance
# tank capacity
COM_FilterEmpty0.25 := ID(ND_FiPipe, SDR_41)/2 - 1/Mass_FilterBodyEmpty*Mass_EntTube0.25*D_EntTubeToFilterBody
# Max water capacity is about 22cm with an empty filter
COM_FilterFull := ID(ND_FiPipe, SDR_41)/2 - 1/Mass_FilterBodyFull*Mass_EntTube*D_EntTubeToFilterBody
# Materials
L_TotalFiPipe := L_FiBodyPipe*N_Fi
L_TotalBranchManifold := 1.5*(3*2*sum(L_FiManBranchLow))
N_Wings := N_Fi*2*N_FiManBranchLow*3.5
