# Entrance Tank Dimensions
# Inputs
AN_EtSlope := 60 deg  # Angle of the sloped walls of the entrance tank hoppers
HW_EtMax := 1.5 m  # Maximum total water depth of the entrance tank to ensure easy access to drain plugs
ND_EtFloat := 6 in
S_EtFloat := 10 cm  # Extra space around the float (increase in effective diameter) to ensure that float has free travel
ND_EtDrainMin := 3 in  # Minimum pipe size to handle grit and to ensure that the pipe can be easily unclogged
Ti_EtDrain := 1 min
# Time required to have contents of one hopper drain. Note that during this time it is assumed that the water level in the entrance tank remains constant.
ND_EtDrain := 3 in  # This is constant for now
# disregard Hopper area when calculating velocities
EN_LinearFlow := 1  # 1 if using Lfom, zero if using nonlinear system
# Tank Design
# This is the minimum size of the pipe to be used as the entrance tank overflow weir to prevent flooding of the entrance tank. I am using 50% of the available freeboard to dump the water into this emergency drain. This drain must be located upstream from the trash racks so that if the trash racks clog the entrance tank doesn't spill. This weir could also be a channel in the entrance tank that is connected to a smaller drainpipe.
ND_EtOverflow := NominalPipeSize(W_rectweir(Q_Plant, H_PlantFreeboard/2)/π)
ND_EtOverflowDrain := max(D_pipeschedule(Q_Plant, PS_Default, 1 m, 1 m, Nu_Water, E_Pvc, K_PipeEnt + K_PipeExit), ND_EtDrainMin)
# The last half of the last hopper must contain the float with its associated free space, the LFOM pipe, and one half of the drain pipe for that hopper (located in the center), plus the required spacing between the pipes. The hoppers are identical and symmetrical lengthwise, so doubling these dimensions gives the minimum length of a single hopper.
L_EtHopperMin := 2*(OuterDiameterFittingPVC(ND_RMPipe) + S_Fitting + OuterDiameterFittingPVC(ND_EtDrain)/2 + OuterDiameterFittingPVC(ND_EtFloat) + S_EtFloat)
L_Et := L_Sed + (OuterDiameterFittingPVC(ND_EtFloat) + S_EtFloat - S_Fitting)
# The entrance tank lies parallel to the flocculator, which has the same length as the sed tank...
T_EtTrLedge := 4*ND_Rebar + T_ConcreteMin
N_EtHoppers := floor((L_Et - T_EtTrLedge)/L_EtHopperMin)  # The maximum number of hoppers in the entrance tank.
L_EtHopper := (L_Et - T_EtTrLedge)/N_EtHoppers
L_Et := N_EtHoppers*L_EtHopper + T_EtTrLedge = 3.74163 m  # Length of the entrance tank. Added 2*T.ConcreteMin for trash rack ledge
# What about length of sed tank beyond rapid mix pipe required for float?
# actual height of the hopper, accounting for space required for drain
H_EtHopper := (L_EtHopper/2 - ConRadius(ND_EtOverflowDrain) - S_Fitting)*tan(60 deg) = 1.40194 m
# The flat spot in the bottom of the hopper will be largest for the overflow drain
HL_Flowmeasure :=
    HL_Lfom if EN_LinearFlow
    HL_Nlfom otherwise
    = 0.2 m  # linear and nonlinear flow meter headloss
H_EtTop := max(HL_Flowmeasure, HW_EtMax - H_EtHopper) = 0.2 m  # excludes freeboard height!!!
# ensures there is water above the pyramic peaks even at zero flow.
# ensures that the width is at least big enough that a human can fit inside and construct the entrance tank, the velocity through the top part of the entrance tank is no greater than that in the floc tank, the overflow pipe can fit in the entrance tank, and the capture velocity is at least as good as that of the sed tank
W_EtCapture := Q_Plant/(L_Et*V_EtUp) = 0.400894 m  # the minimum width required to ensure a capture velocity of 8mm/s
# this last term ensures that the elbow can fit into the entrance tank
# ASSUMPTIONS FOR W.Et
R_CoagTank := D_Tank(V_CoagTank, V_SupplierCoagTank, Dimensions_SupplierCoagTank)/2
T_ChemTankWall := 5 mm
S_ChemTankBorder := 25 cm
S_Operator := .5 m
W_Et := max(W_HumanMin, W_EtCapture, S_FlocBaffle*W_FlocChannel/H_EtTop, ElbowRadius(ND_RMPipe) + ConRadius(ND_RMPipe) + S_Fitting + SocketDepth(ND_RMPipe), 2*(R_CoagTank + T_ChemTankWall) + S_ChemTankBorder + S_Operator)
H_EtHopperBack := min((W_Et - 2*ConRadius(ND_EtDrain) - 2*S_Fitting)*tan(60 deg), H_EtHopper)
# height of the back hopper
# min because we do not want the hopper to be taller than the tank
HW_Et := H_EtHopper + H_EtTop = 1.60194 m
HL_RMMicroOrifice := 0 m  # for now
ID_RMPipe := innerdiameter(ND_RMPipe, PS_Default)
K_RMPipe := 2*K_El90 + K_PipeExit = 2.8
HL_RMPipe := h_l(Q_Plant, ID_RMPipe, 2*HW_EtMax + W_EtWalkway, K_RMPipe, Nu_Water, E_Pvc)  # estimate the length of RM pipe using:2*HW_EtMax + W_EtWalkway
ZW_RMPipe := HW_Sed + HL_Floc + HL_RMPipe + HL_RMMicroOrifice = 1.86595 m
# Elevation of the water inside the rapid mix pipe in the Tee outside the entrance tank
HL_EtLfomtoRm := h_e(Q_Plant, innerdiameter(ND_RMPipe, PS_Default), 2*K_El90) = 0.0130752 m
# one of these elbows is the Tee and the other is the elbow below the lfom
ZW_Et := ZW_RMPipe + H_Freefall + HL_Flowmeasure + HL_EtLfomtoRm = 2.17902 m
# elevation of the maximum water level in the entrance tank (relative to plant datum)
# This freefall is a safety factor inside the lfom
Z_EtTop := ZW_Et + H_PlantFreeboard = 2.27902 m  # Elevation of the top of the entrance tank walls (includes freeboard)
Z_Et := ZW_Et - HW_Et = 0.577086 m  # This is the elevation of the bottom slab of the entrance tank
# bottom elevation of entrance tank (same as the drain entrance elevation)
H_Et := Z_EtTop - Z_Et
Z_EtHopper := Z_Et + H_EtHopper = 1.97902 m  # Top elevation of the hopper. (The peak of the pyramid)
ND_RMPipe =  # error: This variable is undefined.
ID_RMPipe := innerdiameter(ND_RMPipe, PS_Default) = 0.201193 m
ED_Tee := ED_Port(Q_Plant, ID_RMPipe, Pi_VenaContractaOrifice, Pi_Jet) = 0.0861918 m^2/s^3
HL_RMMicroOrifice = 0  # This suggests that the flow through the TEE has a high enough energy dissipation rate to provide rapid mix.
D_RMMicroOrifice =  # error
# Pipe Elevations:
# This is the maximum elevation of the micromix plate to ensure that it is submerged until the plant flow stops.
Z_RmMicroMix := Z_SedWeirExit = 1.60068 m
# Linear case
Z_LfomOrifices := ZW_Et - HL_Flowmeasure + D_LfomOrifices/2 = 1.98852 m
# elevation centers of the bottom orifices of the LFOM. The bottom of the bottom row of orifices is at the zero elevation
# Non Linear Case
Z_PipeGap := ZW_Et - HL_Flowmeasure  # elevation of the orifice gap between pipes that the water flows through
# Drain Design: (one drain in the bottom of each hopper) All drains interconnected to a single pipe that dumps into the drain canal.
Q_EtHopper := L_EtHopper*W_Et*H_EtHopper/(2*Ti_EtDrain) = 0.0323693 m^3/s  # estimates the min flow out of each Hopper during cleaning
K_EtDrains := K_PipeExit + K_PipeEnt = 1.5
# This equation for drain diameter should be used. But we don't know target flow rate initially.
# Although this calculation is approximate it is adequate for designing the drains - I am saving this calculation, but we will set the drain size to always be 3in for now.
ND_EtDrainBetter := max(D_pipeschedule(Q_EtHopper, PS_Default, HW_Et, L_Et, Nu_Water, E_Pvc, K_EtDrains), ND_EtDrainMin) = 0.1016 m
Z_EtExit := min(Z_RmMicroMix + ShortTeeLength(ND_RMPipe) - SocketDepth(ND_RMPipe), ZW_Et - HL_Flowmeasure - S_Fitting - SocketDepth(ND_RMPipe) - ElbowRadius(ND_RMPipe)) = 1.56022 m
# are we sure we want to subtract a socket depth from this?
# This is MAXIMUM centerline elevation of the pipe exiting the entrance tank. Lower is okay. However, the lower this pipe exits the entrance tank, the more difficult it will be to access the micro mix orifice.
# I am finding the distance between the micromix plate and the centerline of the Tee.
HW_RmMicroMix := ZW_RMPipe - Z_RmMicroMix = 0.265271 m  # This is how far below the water level in the rapid mix pipe the orifice plate is located
# If we use a rapid mix orifice!
# We need calculations for the doser elevations...
## Assumptions for Cdc
H_CdcFloatvalve := 5 cm  # Distance between fluid level in constant head tank and orifice for float valve
# I am going to assume that the doser head loss is the same as the flow measurement head loss.
HL_Cdc := HL_Flowmeasure
# Therefore the constraint for the lever arm is the wall height.
# We need to calculate height of the Z_CdcDripZero with the lever arm crossing the wall.
H_CdcDripZero := 6.77 cm
# Estimated minimum elevation difference between the top of the entrance tank wall and the Cdc doser tube discharge (which is at the same elevation as the constant head tank water level), based on the hardware used to mount the lever arm assembly. Estimated distance from lever arm drawing.
Z_EtTop =  # error
Z_CdcDripZero := H_CdcDripZero + Z_EtTop = 2.34672 m  # End of doser tube elevation at zero dose. (also fluid level in constant head tank)
Z_CdcFloatvalveOrifice := Z_CdcDripZero + H_CdcFloatvalve = 2.39672 m
Z_CoagulantOutlet := Z_CdcFloatvalveOrifice + H_CoagTankAboveHeadTank = 2.69672 m  # This is the height of the outlet from the stock tanks
Z_CoagulantTankBottom := Z_CoagulantOutlet - B_StockOutlet = 2.59672 m  # This is the height of the coagulant stock tank base
# There must be a wall between the stock tanks and the entrance tank to prevent spills from reaching the entrance tank.
# The constant head tank can be located in front of Coag stock tanks
HW_Sed =  # error
HW_FlocStart =  # error
Z_Walkway := HW_Sed - 45 cm = 1.20242 m
# Height of the entrance tank wall from the walkway
H_ETfromWalkway := Z_EtTop - Z_Walkway = 1.0766 m
H_CdcChtfromWalkway := Z_CdcDripZero - Z_Walkway = 1.1443 m  # Height of the constant head tank (fluid level) from the walkway
Z_Et =  # error
Z_Walkway - Z_Et =  # error
## Trash Racks
N_TRSpacesV := ceil((W_Et + 4*ND_Rebar)/(D_LfomOrifices/sqrt(2) + ND_Rebar))  # number of spaces between rebar spanning the width of the entrance tank
B_EtRebar := (W_Et + 3*ND_Rebar)/N_TRSpacesV = 0.0255754 m
# number of spaces between rebar spanning the heigth of the top of the entrance tank
N_TRSpacesH := ceil((H_EtTop + H_PlantFreeboard/2 + 2*ND_Rebar)/B_EtRebar)
W_rectweir(Q, H) := 3/2*Q/(Pi_VenaContractaOrifice*sqrt(2*g)*H^(3/2))
H_HorizChannelΠ(Q, Π_Channel, ΔH, L_Channel, ν, ε, manifold)
W_HorizChannelΠ(Q, Π_Channel, ΔH, L_Channel, ν, ε, manifold)
Q_Plant =  # error
Q_rectweir(W, H) := 2/3*W*Pi_VenaContractaOrifice*sqrt(2*g)*H^(3/2)
Π_EtDrainChannel := 1
Q_Plant =  # error
H_EtWeirMax := 2 cm
L_Et =  # error
Q_EtDrainChannel := Q_Plant
HL_EtOverflowWeir := Headloss_weir(Q_Plant, L_Et)
HL_EtOverflowWeir =  # error
H_EtDrainChannel := H_HorizChannelΠ(Q_EtDrainChannel, Π_EtDrainChannel, H_EtWeirMax, L_Et, Nu_Water, E_Concrete, 1)
H_EtDrainChannel =  # error
W_EtDrainChannel := W_HorizChannelΠ(Q_EtDrainChannel, Π_EtDrainChannel, H_EtWeirMax, L_Et, Nu_Water, E_Concrete, 1)
W_EtDrainChannel =  # error
