# Entrance Tank
# Flow Control Drain and Entrance Tank Walkway
# This feature is a pipe with a gate valve draining into the entrance tank drain channel from a pipe out of the entrance tank's first hopper. The purpose is to control the plant flow by wasting a certain amount of the influent. The operator will need to learn empirically how many turns of the valve handle will give the desired flow rates, which he will read off of a scale in the entrance tank.
HW_EtEst := 0.8 m
L_EtFlowControlPipeEst := 2 m
ND_EtFlowControl := D_pipeschedule(Q_Plant, PS_Default, HW_EtEst, L_EtFlowControlPipeEst, Nu_Water, E_Pvc, K_PipeExit + K_PipeEnt + K_GateValve + 2*K_El90) = 1.5 in
W_EtWalkway := max(W_EtWalkwayMin, 2*MaleAdapterLength(ND_EtFlowControl) + ValveLength(ND_EtFlowControl) - 2*ValveSocket(ND_EtFlowControl) + ElbowRadius(ND_EtFlowControl) + SocketDepth(ND_EtFlowControl) + ConRadius(ND_EtFlowControl) + S_Fitting) = 1 m
ND_EtOverflowDrain := D_PipeChannel(Q_Plant/2, PS_Default) = 2 in
# Length, Width, and Hopper Calculations
W_EtDCMinRMFit := max(W_EtDCMin, 2*ConRadius(ND_RMPipe))
W_EtFloatDrainLFOM := 2*ConRadius(ND_EtFloat) + S_EtFloat + 2*ConRadius(ND_RMPipe) + 2*S_Fitting + 2*ConRadius(ND_EtDrain) + L_EtSupport
W_EtSupportDrainChannel := 2*L_EtSupport + 3*S_Fitting + 2*ConRadius(ND_EtDrain) + 2*ConRadius(ND_EtOverflowDrain)
W_EtDCLFOM := W_EtDCMinRMFit + T_PlantWall + S_Fitting + OuterDiameterFittingPVC(ND_RMPipe) + S_Fitting = 0.5516 m
W_EtDCOverflow := W_EtDCMinRMFit + SocketDepth(ND_EtOverflowDrain) + ElbowRadius(ND_EtOverflowDrain) + ConRadius(ND_EtOverflowDrain) + S_Fitting = 0.406331 m
W_EtMin := max(W_HumanMin, W_EtFloatDrainLFOM, W_EtSupportDrainChannel, W_EtDCLFOM, W_EtDCOverflow)  # Minimum width to satisfy geometric constraints
L_EtMax := L_Sed  # maximum length to prevent enlarging the plant footprint
H_EtHopperMin :=
    (35 cm) if Q_Plant ≤ 3*L/s
    (50 cm) otherwise  # so that the hoppers aren't so small that they need to be drained frequently
H_EtHopperMax := HW_EtMax - HL_Flowmeasure  # so that the entrance tank doesn't get too deep
L_EtHopperMax := min(2*(H_EtHopperMax/tan(AN_EtSlopeMax) + ConRadius(ND_EtDrain) + S_Fitting), (L_EtMax - 2*ConRadius(ND_EtDrain) - 2*S_Fitting - 2*T_EtHopperLedge)/2) = 0.836685 m
# Even though I included plumbing here, it should never constrain the length
L_EtHopperMin := min(L_EtHopperMax, max(2*(H_EtHopperMin/tan(AN_EtSlopeMax) + S_Fitting + ConRadius(ND_EtDrain)), 2*(OuterDiameterFittingPVC(ND_RMPipe) - ConRadius(ND_EtDrain) + S_Fitting), 2*(S_EtFloat + ConRadius(ND_EtFloat)))) = 0.836685 m
# if the min is larger than the max, we sacrifice capacity, assuming the plumbing is never constraining
# Required length of the *full* hoppers to meet the capture velocity requirement, assuming min width:
L_EtCaptureEffectiveMin :=
    Q_Plant/V_EtUpMin/W_EtMin if Q_Plant/V_EtUpMin/W_EtMin + 2*(L_EtHopperMin/2 + ConRadius(ND_EtDrain) + S_Fitting + T_EtHopperLedge) < L_Sed
    "null" otherwise
    = 0.223242 m
# need to define as null for now because need some equations below to calculate for case when L.Et = L.Sed
# ensures at least 1 full hopper, use max length to minimize #hoppers
N_EtFullHopper :=
    Ceil((L_EtCaptureEffectiveMin + T_EtHopperLedge)/(L_EtHopperMax + T_EtHopperLedge), 1) if L_EtCaptureEffectiveMin ≠ "null" and L_EtCaptureEffectiveMin - (floor((L_EtCaptureEffectiveMin + T_EtHopperLedge)/(L_EtHopperMax + T_EtHopperLedge)) - 1)*T_EtHopperLedge ≤ L_EtCaptureEffectiveMin
    max(floor((L_EtCaptureEffectiveMin + T_EtHopperLedge)/(L_EtHopperMax + T_EtHopperLedge)), 1) if L_EtCaptureEffectiveMin ≠ "null" and L_EtCaptureEffectiveMin - (floor((L_EtCaptureEffectiveMin + T_EtHopperLedge)/(L_EtHopperMax + T_EtHopperLedge)) - 1)*T_EtHopperLedge > L_EtCaptureEffectiveMin
    Ceil((L_EtMax - 2*(L_EtHopperMin/2 + ConRadius(ND_EtDrain) + S_Fitting))/(L_EtHopperMax + T_EtHopperLedge), 1) otherwise
    = 1
L_EtHopper := max(L_EtHopperMin, {
    (L_EtCaptureEffectiveMin - N_EtFullHopper*T_EtHopperLedge)/N_EtFullHopper if L_EtCaptureEffectiveMin ≠ "null"
    (L_EtMax - 2*ConRadius(ND_EtDrain) - 2*S_Fitting - T_EtHopperLedge*(N_EtFullHopper + 1))/(N_EtFullHopper + 1) otherwise
}) = 0.836685 m  # when we go to L.EtHopperMin we sacrifice 45 deg slope
L_Et :=
    L_Sed if L_EtCaptureEffectiveMin == "null"
    N_EtFullHopper*L_EtHopper + (N_EtFullHopper + 1)*T_EtHopperLedge + 2*(ConRadius(ND_EtDrain) + S_Fitting) otherwise
    = 1.33828 m
L_EtCaptureEffective :=
    L_EtCaptureEffectiveMin if L_EtCaptureEffectiveMin ≠ "null"
    (L_Et - ConRadius(ND_EtDrain) - S_Fitting) otherwise
H_EtHopper := min((L_EtHopper - 2*(ConRadius(ND_EtDrain) + S_Fitting))/2*tan(AN_EtSlopeMax), H_EtHopperMax) = 0.317542 m
AN_EtSlope := atan(H_EtHopper/(L_EtHopper/2 - S_Fitting - ConRadius(ND_EtDrain))) = 45 deg
W_EtCapture := Q_Plant/V_EtUpMin/(L_Et - (S_Fitting + ConRadius(ND_EtDrain))) = 0.202023 m
W_Et := max(W_EtMin, W_EtCapture)
V_EtUp := Q_Plant/(W_Et*(L_Et - (S_Fitting + ConRadius(ND_EtDrain))))
HW_Et := H_EtHopper + HL_Flowmeasure
H_EtTop := HL_Flowmeasure + H_PlantFreeboard
H_Et := HW_Et + H_PlantFreeboard
L_EtHopperFront := L_EtSupport
H_EtHopperFront := min(H_EtHopper, tan(AN_EtSlope)*L_EtHopperFront)
L_EtHopperBack := W_Et - 2*S_Fitting - 2*ConRadius(ND_EtDrain) - L_EtHopperFront = 0.518262 m
H_EtHopperBack := min(H_EtHopper, tan(AN_EtSlope)*L_EtHopperBack) = 0.317542 m
AN_EtHopperBackSlope := atan(H_EtHopperBack/L_EtHopperBack) = 31.496 deg
AN_EtHopperFrontSlope := atan(H_EtHopperFront/L_EtHopperFront) = 38.4445 deg
# Overflow Channel
W_EtOverflowSlot := innerdiameter(ND_EtOverflowDrain, PS_Default)*sin(acos(1 - 2*0.9)) = 3.31165 cm
# This sizes the slot such that only 10% of the vertical dimension of the pipe is cut away.
L_EtChannelPipes := (L_EtHopper/2 + ConRadius(ND_EtDrain) + S_Fitting - 2*CapThickness(ND_EtOverflowDrain) - TeeLength(ND_EtOverflowDrain))/2 = 0.192102 m
L_EtOverflowWeir := 2*(L_EtHopper/2 + ConRadius(ND_EtDrain) + S_Fitting - 2*CapThickness(ND_EtOverflowDrain)) = 1.02241 m
H_EtOverflowCutaway := 0.1*innerdiameter(ND_EtOverflowDrain, PS_Default) = 0.2173 in
H_EtLFOMtoOverflow := 3 cm
H_EtWaterRise := Headloss_weir(Q_Plant, L_EtOverflowWeir) + H_EtLFOMtoOverflow = 4.03416 cm
# This is a conservative (high) estimate of the amount of freeboard which will be used up by the water level rise if double the plant capacity is flowing into the entrance tank (does not take into account the fraction of the additional flow which will flow through the LFOM due to the higher water level)
# Heights and Elevations
D_RMOrifice := D_PipeED(E_MaxRM, Q_Plant, Pi_VenaContractaOrifice, Pi_Jet) = 0.0657725 m
HL_RMMicroOrifice := h_orifice(D_RMOrifice, Pi_VenaContractaOrifice, Q_Plant) = 4.45115 cm
HL_RMPipe :=
    h_l(Q_Plant, innerdiameter(ND_RMPipe, PS_Default), 2*HW_EtMax + W_EtWalkway, K_El90 + K_PipeExit, Nu_Water, E_Pvc) if Q_Plant > Q_PlantMaxLF
    h_l(Q_Plant, innerdiameter(ND_RMPipe, PS_Default), 2*HW_EtMax + W_EtWalkway, 3*K_El90 + K_PipeExit, Nu_Water, E_Pvc) otherwise
# estimate the length of RM pipe using:2*HW_EtMax + W_EtWalkway
ZW_RMPipe := HW_Sed + HL_Floc + HL_RMPipe + HL_RMMicroOrifice = 1.90243 m
# Elevation of the water inside the rapid mix pipe in the Tee outside the entrance tank
ZW_Et := ZW_RMPipe + H_Freefall + HL_Flowmeasure + HL_RMPipe = 2.24005 m
# elevation of the maximum water level in the entrance tank (relative to plant datum)
# This freefall is a safety factor inside the lfom
Z_EtTop := ZW_Et + H_PlantFreeboard = 2.34005 m  # Elevation of the top of the entrance tank walls (includes freeboard)
Z_Et := ZW_Et - HW_Et = 1.7225 m  # This is the elevation of the bottom slab of the entrance tank
# bottom elevation of entrance tank (same as the drain entrance elevation)
Z_EtHopper := Z_Et + H_EtHopper = 2.04005 m  # Top elevation of the first set of hoppers. (The peak of the pyramid)
ED_Tee := ED_Port(Q_Plant, innerdiameter(ND_RMPipe, PS_Default), Pi_VenaContractaOrifice, Pi_Jet) = 222.299 mW/kg
# This suggests that the flow through the TEE has a high enough energy dissipation rate to provide rapid mix.
Z_RmMicroMix := Z_SedWeirExit
# This is the maximum elevation of the micromix plate to ensure that it is submerged until the plant flow stops. Since we are putting the plate in the flocculator entrance coupling this should not be an issue.
# Linear case
Z_LfomOrifices := ZW_Et - HL_Flowmeasure + D_LfomOrifices/2
# elevation centers of the bottom orifices of the LFOM. The bottom of the bottom row of orifices is at the zero elevation
# Non Linear Case
Z_PipeGap := ZW_Et - HL_Flowmeasure  # elevation of the orifice gap between pipes that the water flows through
Z_EtExitMax := min(Z_RmMicroMix + TeeLength(ND_RMPipe)/2, ZW_Et - HL_Flowmeasure - S_Fitting - SocketDepth(ND_RMPipe) - ElbowRadius(ND_RMPipe))
# This is MAXIMUM centerline elevation of the pipe exiting the entrance tank. Lower is okay. However, the lower this pipe exits the entrance tank, the more difficult it will be to access the micro mix orifice.
# I am finding the distance between the micromix plate and the centerline of the Tee.
# This is how far below the water level in the rapid mix pipe the orifice plate is located at max plant flow if we use a rapid mix orifice.
HW_RmMicroMix := ZW_RMPipe - Z_RmMicroMix = 0.318078 m
# Hopper Drains
ND_EtDrain =  # error: This variable is undefined.
# Currently the drains are always set to 3in nominal diameter, but we are saving these calculations which design the drains more thoroughly.
Q_EtHopper := L_EtHopper*W_Et*H_EtHopper/(2*Ti_EtDrain)  # estimates the max flow out of each Hopper during cleaning
ND_EtDrainBetter := max(D_pipeschedule(Q_EtHopper, PS_Default, HW_Et, L_Et, Nu_Water, E_Pvc, K_PipeExit + K_PipeEnt), ND_EtDrainMin)
# Although this calculation is approximate it is adequate for designing the drains.
# Doser Elevations
ZW_CdcCht := Z_EtTop + H_DoserAssembly = 2.40775 m  # End of doser tube elevation at zero flow. (also fluid level in constant head tank)
Z_CdcFloatValveOrifice := ZW_CdcCht + H_CdcFloatvalve = 2.45775 m
Z_CoagulantOutlet := Z_CdcFloatValveOrifice + H_CoagTankAboveHeadTank = 2.75775 m  # This is the height of the outlet from the stock tanks
Z_CoagulantTankBottom := Z_CoagulantOutlet - B_StockOutlet = 2.65775 m  # This is the height of the coagulant stock tank base
## Trash Racks
N_TRSpacesV := ceil((W_Et + 4*D_Rebar)/(D_LfomOrifices/sqrt(2) + D_Rebar))  # number of spaces between rebar spanning the width of the entrance tank
B_EtRebar := (W_Et + 3*D_Rebar)/N_TRSpacesV = 0.0203151 m
# number of spaces between rebar spanning the heigth of the top of the entrance tank
N_TRSpacesH := ceil((H_EtTop - H_PlantFreeboard/2 + 2*D_Rebar)/B_EtRebar)
# Coagulant Stock Tank Elevation
Z_CoagTank := Z_EtTop + H_CoagTankAboveHeadTank + H_DoserAssembly - B_StockOutlet
Z_CoagTankOutlet := Z_CoagTank + B_StockOutlet
# Drain Channel
Q_EtDCMax := max(Q_Plant, Q_pipeminor(innerdiameter(ND_EtDrain, PS_Default), H_Et, K_PipeEnt + K_PipeExit)*(N_EtFullHopper + 1)) = 29.6729 L/s
L_EtDC := L_Et - 2*(S_Fitting + ConRadius(ND_RMPipe))
W_EtDCOLD := max(2*ConRadius(ND_RMPipe), W_Et - max(OuterDiameterFittingPVC(ND_RMPipe) + 2*S_Fitting + T_PlantWall, S_Fitting + ConRadius(ND_EtOverflowDrain) + ElbowRadius(ND_EtOverflowDrain) + SocketDepth(ND_EtOverflowDrain))) = 0.768262 m
W_EtDC := max(3*S_Fitting + 2*ConRadius(ND_EtDrain) + 2*ConRadius(ND_EtOverflowDrain), 2*ConRadius(ND_RMPipe)) = 0.319863 m
H_EtDCMinFittingsOLD := max(OuterDiameterFittingPVC(ND_EtOverflowDrain), OuterDiameterFittingPVC(ND_EtFlowControl)) = 0.0682625 m
H_EtDCMinFittings := OuterDiameterFittingPVC(ND_EtFlowControl) = 0.05715 m
H_EtDCMinCapacity := H_HorizChannelMin(Q_EtDCMax, W_EtDC, L_EtDC, Nu_Water, E_Concrete, 1) = 0.146255 m
H_EtDC :=
    max(H_EtDCMinCapacity, H_EtDCMinFittings, 2*ConRadius(ND_RMPipe)) if Z_FlocTank + 2*S_Fitting + OuterDiameterFittingPVC(ND_RMPipe) ≤ Z_Et - T_PlantWall - max(H_EtDCMinCapacity, H_EtDCMinFittings, 2*ConRadius(ND_RMPipe)) - T_ChannelWall
    (Z_Et - Z_FlocTank - T_PlantWall) otherwise
    = 0.146255 m
# estimate 1/3 of back slope does not overlap with side slopes
# Other Parameters
Ti_Et := (W_Et*L_Et*HW_Et - ((N_EtFullHopper + 1)*0.5*H_EtHopper*W_Et*(L_EtHopper/2 - S_Fitting - ConRadius(ND_EtDrain)) - 1/3*H_EtHopperBack*L_Et*(W_Et - 2*(S_Fitting + ConRadius(ND_EtDrain)))))/Q_Plant
.
