# Entrance Tank
# Flow Control Drain and Entrance Tank Walkway
# This feature is a pipe with a gate valve draining into the entrance tank drain channel from a pipe out of the entrance tank's first hopper. The purpose is to control the plant flow by wasting a certain amount of the influent. The operator will need to learn empirically how many turns of the valve handle will give the desired flow rates, which he will read off of a scale in the entrance tank.
HW_EtEst := 0.8 m
L_EtFlowControlPipeEst := 2 m
ND_EtFlowControl := D_pipeschedule(Q_Plant, PS_Default, HW_EtEst, L_EtFlowControlPipeEst, Nu_Water, E_Pvc, K_PipeExit + K_PipeEnt + K_GateValve + 2*K_El90) = 6 in
W_EtWalkway := max(W_EtWalkwayMin, 2*MaleAdapterLength(ND_EtFlowControl) + ValveLength(ND_EtFlowControl) - 2*ValveSocket(ND_EtFlowControl) + ElbowRadius(ND_EtFlowControl) + SocketDepth(ND_EtFlowControl) + ConRadius(ND_EtFlowControl) + S_Fitting) = 1 m
# Length and Hopper Calculations
L_Et := L_Sed
H_EtHopperMin := 75 cm  # so that the hoppers aren't so small that they need to be drained frequently
H_EtHopperMax := HW_EtMax - HL_Flowmeasure
L_EtHopperMin := max(2*H_EtHopperMin/tan(AN_EtSlope), 2*(OuterDiameterFittingPVC(ND_RMPipe) + 2*S_Fitting + ConRadius(ND_EtDrain)))
N_EtFullHopper := max(floor((L_Et - 1/2*L_EtHopperMin - (S_Fitting + ConRadius(ND_EtDrain)))/(L_EtHopperMin + T_EtHopperLedge)), 2)
# The max function ensures at least 2 full hoppers
L_EtHopper := (L_Et - (S_Fitting + ConRadius(ND_EtDrain)) - N_EtFullHopper*T_EtHopperLedge)/(N_EtFullHopper + 0.5)
# The first hopper is a half hopper, taken into account with the 0.5 in the denominator.
H_EtHopper := min(max((L_EtHopper - ConRadius(ND_EtDrain) - S_Fitting)/2*tan(AN_EtSlope), H_EtHopperMin), H_EtHopperMax)
AN_EtSlope :=
    AN_EtSlope if (L_EtHopper - ConRadius(ND_EtDrain) - S_Fitting)*tan(AN_EtSlope)/2 ≤ H_EtHopperMax
    atan(H_EtHopper/(L_EtHopper/2 - S_Fitting - ConRadius(ND_EtDrain))) otherwise
HW_Et := H_EtHopper + HL_Flowmeasure
H_EtTop := HL_Flowmeasure + H_PlantFreeboard
H_Et := HW_Et + H_PlantFreeboard
H_EtLastSlope := H_EtHopper - 20 cm
# Overflow Channel
ND_EtOverflowDrain := D_PipeChannel(Q_Plant/2, PS_Default) = 8 in
W_EtOverflowSlot := innerdiameter(ND_EtOverflowDrain, PS_Default)*sin(acos(1 - 2*0.9)) = 12.0716 cm
# This sizes the slot such that only 10% of the vertical dimension of the pipe is cut away.
L_EtChannelPipes := (L_EtHopper/2 + ConRadius(ND_EtDrain) + S_Fitting - 2*CapThickness(ND_EtOverflowDrain) - TeeLength(ND_EtOverflowDrain))/2 = 0.268949 m
L_EtOverflowWeir := 2*(L_EtHopper/2 + ConRadius(ND_EtDrain) + S_Fitting - 2*CapThickness(ND_EtOverflowDrain)) = 1.787 m
H_EtOverflowCutaway := 0.1*innerdiameter(ND_EtOverflowDrain, PS_Default) = 0.7921 in
H_EtLFOMtoOverflow := 3 cm
H_EtWaterRise := Headloss_weir(Q_Plant, L_EtOverflowWeir) + H_EtLFOMtoOverflow = 7.52551 cm
# This is a conservative (high) estimate of the amount of freeboard which will be used up by the water level rise if double the plant capacity is flowing into the entrance tank (does not take into account the fraction of the additional flow which will flow through the LFOM due to the higher water level)
# Tank Width and Hopper Back Slope
W_EtCapture := Q_Plant/V_EtUp/(L_Et - 1/2*L_EtHopper - (S_Fitting + ConRadius(ND_EtDrain))) = 0.753158 m
W_EtFloatLFOM := 2*ConRadius(ND_EtFloat) + 2*S_EtFloat + 2*ConRadius(ND_RMPipe) + S_Fitting = 0.838963 m
W_EtDCLFOM := W_EtDCMin + T_PlantWall + S_Fitting + OuterDiameterFittingPVC(ND_RMPipe) + S_Fitting = 0.802425 m
W_EtDCOverflow := W_EtDCMin + SocketDepth(ND_EtOverflowDrain) + ElbowRadius(ND_EtOverflowDrain) + ConRadius(ND_EtOverflowDrain) + S_Fitting = 0.737069 m
# Terms in the width calculation ensure that:
# - A worker can fit inside for construction and maintenance
# - The desired capture velocity is achieved
# - The CDC float and LFOM fit side-by-side
# - The drain channel beneath the front side of the tank can be wide enough without running into the rapid mix pipe
# - The drain channel beneath the front side of the tank can be wide enough while still fitting the overflow drain plumbing behind it
W_Et := max(W_HumanMin, W_EtCapture, W_EtFloatLFOM, W_EtDCLFOM, W_EtDCOverflow) = 0.838963 m
H_EtHopperBack := min(H_EtHopper, tan(AN_EtSlope)*(W_Et - 2*(ConRadius(ND_EtDrain) + S_Fitting))) = 0.637362 m
L_EtHopperBack := W_Et - 2*S_Fitting - 2*ConRadius(ND_EtDrain) = 0.637363 m
AN_EtHopperBackSlope := atan(H_EtHopperBack/L_EtHopperBack) = 45 deg
# Heights and Elevations
D_RMOrifice := D_PipeED(E_MaxRM, Q_Plant, Pi_VenaContractaOrifice, Pi_Jet) = 0.215822 m
HL_RMMicroOrifice := h_orifice(D_RMOrifice, Pi_VenaContractaOrifice, Q_Plant) = 9.82894 cm
HL_RMPipe := h_l(Q_Plant, innerdiameter(ND_RMPipe, PS_Default), 2*HW_EtMax + W_EtWalkway, K_El90 + K_PipeExit, Nu_Water, E_Pvc)
# estimate the length of RM pipe using:2*HW_EtMax + W_EtWalkway
ZW_RMPipe := HW_Sed + HL_Floc + HL_RMPipe + HL_RMMicroOrifice = 2.07662 m
# Elevation of the water inside the rapid mix pipe in the Tee outside the entrance tank
ZW_Et := ZW_RMPipe + H_Freefall + HL_Flowmeasure + HL_RMPipe = 2.39996 m
# elevation of the maximum water level in the entrance tank (relative to plant datum)
# This freefall is a safety factor inside the lfom
Z_EtTop := ZW_Et + H_PlantFreeboard = 2.49996 m  # Elevation of the top of the entrance tank walls (includes freeboard)
Z_Et := ZW_Et - HW_Et = 1.4402 m  # This is the elevation of the bottom slab of the entrance tank
# bottom elevation of entrance tank (same as the drain entrance elevation)
Z_EtHopper := Z_Et + H_EtHopper = 2.19996 m  # Top elevation of the first set of hoppers. (The peak of the pyramid)
ED_Tee := ED_Port(Q_Plant, innerdiameter(ND_RMPipe, PS_Default), Pi_VenaContractaOrifice, Pi_Jet) = 105.909 mW/kg
# This suggests that the flow through the TEE has a high enough energy dissipation rate to provide rapid mix.
Z_RmMicroMix := Z_SedWeirExit
# This is the maximum elevation of the micromix plate to ensure that it is submerged until the plant flow stops. Since we are putting the plate in the flocculator entrance coupling this should not be an issue.
# Linear case
Z_LfomOrifices := ZW_Et - HL_Flowmeasure + D_LfomOrifices/2
# elevation centers of the bottom orifices of the LFOM. The bottom of the bottom row of orifices is at the zero elevation
# Non Linear Case
Z_PipeGap := ZW_Et - HL_Flowmeasure  # elevation of the orifice gap between pipes that the water flows through
Z_EtExitMax := min(Z_RmMicroMix + TeeLength(ND_RMPipe)/2, ZW_Et - HL_Flowmeasure - S_Fitting - SocketDepth(ND_RMPipe) - ElbowRadius(ND_RMPipe))
# This is MAXIMUM centerline elevation of the pipe exiting the entrance tank. Lower is okay. However, the lower this pipe exits the entrance tank, the more difficult it will be to access the micro mix orifice.
# I am finding the distance between the micromix plate and the centerline of the Tee.
# This is how far below the water level in the rapid mix pipe the orifice plate is located at max plant flow if we use a rapid mix orifice.
HW_RmMicroMix := ZW_RMPipe - Z_RmMicroMix = 0.247635 m
# Hopper Drains
ND_EtDrain =  # error: This variable is undefined.
# Currently the drains are always set to 3in nominal diameter, but we are saving these calculations which design the drains more thoroughly.
Q_EtHopper := L_EtHopper*W_Et*H_EtHopper/(2*Ti_EtDrain)  # estimates the max flow out of each Hopper during cleaning
ND_EtDrainBetter := max(D_pipeschedule(Q_EtHopper, PS_Default, HW_Et, L_Et, Nu_Water, E_Pvc, K_PipeExit + K_PipeEnt), ND_EtDrainMin)
# Although this calculation is approximate it is adequate for designing the drains.
# Doser Elevations
H_CdcFloatvalve := 5 cm  # Distance between fluid level in constant head tank and orifice for float valve
H_CdcDripZero := 6.77 cm
# Estimated minimum elevation difference between the top of the entrance tank wall and the Cdc doser tube discharge (which is at the same elevation as the constant head tank water level), based on the hardware used to mount the lever arm assembly. Estimated distance from lever arm drawing.
Z_CdcDripZero := H_CdcDripZero + Z_EtTop = 2.56766 m  # End of doser tube elevation at zero dose. (also fluid level in constant head tank)
Z_CdcFloatvalveOrifice := Z_CdcDripZero + H_CdcFloatvalve = 2.61766 m
Z_CoagulantOutlet := Z_CdcFloatvalveOrifice + H_CoagTankAboveHeadTank = 2.91766 m  # This is the height of the outlet from the stock tanks
Z_CoagulantTankBottom := Z_CoagulantOutlet - B_StockOutlet = 2.81766 m  # This is the height of the coagulant stock tank base
# There must be a wall between the stock tanks and the entrance tank to prevent spills from reaching the entrance tank.
H_ETfromWalkway := Z_EtTop - Z_Walkway = 1.00012 m  # Height of the entrance tank wall from the walkway
H_CdcChtfromWalkway := Z_CdcDripZero - Z_Walkway = 1.06782 m  # Height of the constant head tank (fluid level) from the walkway
## Trash Racks
N_TRSpacesV := ceil((W_Et + 4*D_Rebar)/(D_LfomOrifices/sqrt(2) + D_Rebar))  # number of spaces between rebar spanning the width of the entrance tank
B_EtRebar := (W_Et + 3*D_Rebar)/N_TRSpacesV = 0.025796 m
# number of spaces between rebar spanning the heigth of the top of the entrance tank
N_TRSpacesH := ceil((H_EtTop - H_PlantFreeboard/2 + 2*D_Rebar)/B_EtRebar)
# Coagulant Stock Tank Elevation
Z_CoagTank := Z_EtTop + H_CoagTankAboveHeadTank + H_DoserAssembly - B_StockOutlet
Z_CoagTankOutlet := Z_CoagTank + B_StockOutlet
# Drain Channel
Q_EtDCMax := max(Q_Plant, Q_pipeminor(innerdiameter(ND_EtDrain, PS_Default), H_Et, K_PipeEnt + K_PipeExit)*(N_EtFullHopper + 1)) = 77.743 L/s
L_EtDC := L_Et + T_PlantWall
W_EtDC := W_Et - max(OuterDiameterFittingPVC(ND_RMPipe) + 2*S_Fitting + T_PlantWall, S_Fitting + ConRadius(ND_EtOverflowDrain) + ElbowRadius(ND_EtOverflowDrain) + SocketDepth(ND_EtOverflowDrain)) = 0.236538 m
H_EtDCMinFittings := max(OuterDiameterFittingPVC(ND_EtOverflowDrain), OuterDiameterFittingPVC(ND_EtFlowControl)) = 0.236537 m
H_EtDCMinCapacity := H_HorizChannelMin(Q_EtDCMax, W_EtDC, L_EtDC, Nu_Water, E_Concrete, 1) = 0.356763 m
H_EtDC := max(H_EtDCMinCapacity, H_EtDCMinFittings) = 0.356763 m
