Q_Plant := 4*L/s
# [reference: ExpertInputs.xmcd]
# [reference: MathFunctions.xmcd]
# [reference: PipeDatabase.xmcd]
# [reference: MaterialsDatabase.xmcd]
# [reference: FluidsFunctions.xmcd]
# [reference: CdcFunctions.xmcd]
# [reference: SedimentationTank.xmcd]
# [reference: Flocculator.xmcd]
# [reference: LFOM.xmcd]
# Entrance Tank
EN_TwoInlets := 1
# Flow Control Drain and Entrance Tank Walkway
# This feature is a pipe with a gate valve draining into the entrance tank drain channel from a pipe out of the entrance tank's first hopper. The purpose is to control the plant flow by wasting a certain amount of the influent. The operator will need to learn empirically how many turns of the valve handle will give the desired flow rates, which he will read off of a scale in the entrance tank.
HW_EtEst := 0.8 m
L_EtFlowControlPipeEst := 2 m
Q_PlantRange := .5*L/s, 1*L/s .. 40*L/s
ND_EtFlowControl := D_pipeschedule(Q_Plant, PS_Default, HW_EtEst, L_EtFlowControlPipeEst, Nu_Water, E_Pvc, K_PipeExit + K_PipeEnt + K_GateValve + 2*K_El90) = 2 in
ND_EtFlowControl(Q_Plant) := D_pipeschedule(Q_PlantRange, PS_Default, HW_EtEst, L_EtFlowControlPipeEst, Nu_Water, E_Pvc, K_PipeExit + K_PipeEnt + K_GateValve + 2*K_El90)
# Using 1 overflow control valve for the 2 inlets:
# The sum of the two inlets would be that flow rate...
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# Using 2 overflow control valves:
# Each would be that diameter at that flow rate...
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ND_EtOverflowDrain := D_PipeChannel(Q_Plant/2, PS_Default) = 3 in
ND_EtInlet := D_pipe(Q_Plant, AvailND, 1 m, 100 m, Nu_Water, E_Concrete, K_PipeEnt + K_PipeExit) = 4 in
ND_EtFlowControl :=
    D_PipeChannel(Q_Plant/2, PS_Default) if EN_TwoInlets == 1
    D_PipeChannel(Q_Plant, PS_Default) otherwise
# Length, Width, and Hopper Calculations (grit =0)
W_EtDCMinRMFit := max(W_EtDCMin, 2*ConRadius(ND_RMPipe))
W_EtFloatDrainLFOM := 2*ConRadius(ND_EtFloat) + S_EtFloat + 2*ConRadius(ND_RMPipe) + 2*S_Fitting + 2*ConRadius(ND_EtDrain) + L_EtSupport
W_EtSupportDrainChannel := 2*(L_EtSupport + T_ChannelWall - T_PlantWall) + 3*S_Fitting + 2*ConRadius(ND_EtDrain) + 2*ConRadius(ND_EtOverflowDrain)
W_EtFirstHopperTwoInlet := 4*(S_Fitting + ConRadius(ND_EtDrain)) + T_EtRemovableWall + 2*T_EtRemovableWallSupport + 2*L_EtSupport
# Note this Width needs a lot of figuring to calculate the witdth the slopes will take up
W_EtDCLFOM := W_EtDCMinRMFit + T_PlantWall + S_Fitting + OuterDiameterFittingPVC(ND_RMPipe) + S_Fitting = 0.578588 m
W_EtDCOverflow := W_EtDCMinRMFit + SocketDepth(ND_EtOverflowDrain) + ElbowRadius(ND_EtOverflowDrain) + ConRadius(ND_EtOverflowDrain) + S_Fitting = 0.4611 m
W_EtMin :=
    max(W_HumanMin, W_EtFloatDrainLFOM, W_EtSupportDrainChannel, W_EtDCLFOM, W_EtDCOverflow) if EN_TwoInlets == 0
    max(W_HumanMin, W_EtFloatDrainLFOM, W_EtSupportDrainChannel, W_EtDCLFOM, W_EtDCOverflow, W_EtFirstHopperTwoInlet) otherwise
# Minimum width to satisfy geometric constraints
L_EtMax := L_Sed  # maximum length to prevent enlarging the plant footprint
H_EtHopperMin :=
    (35 cm) if Q_Plant ≤ 3*L/s
    (50 cm) otherwise  # so that the hoppers aren't so small that they need to be drained frequently
H_EtHopperMax := HW_EtMax - HL_Flowmeasure  # so that the entrance tank doesn't get too deep
L_EtHopperMax := min(2*(H_EtHopperMax/tan(AN_EtSlopeMax) + ConRadius(ND_EtDrain) + S_Fitting), (L_EtMax - 2*ConRadius(ND_EtDrain) - 2*S_Fitting - 2*T_EtHopperLedge)/2) = 1.16876 m
# Even though I included plumbing here, it should never constrain the length
L_EtHopperMin := min(L_EtHopperMax, max(2*(H_EtHopperMin/tan(AN_EtSlopeMax) + S_Fitting + ConRadius(ND_EtDrain)), 2*(OuterDiameterFittingPVC(ND_RMPipe) - ConRadius(ND_EtDrain) + S_Fitting), 2*(S_EtFloat + ConRadius(ND_EtFloat)))) = 1.16876 m
# if the min is larger than the max, we sacrifice capacity, assuming the plumbing is never constraining
# Required length of the *full* hoppers to meet the capture velocity requirement, assuming min width:
L_EtCaptureEffectiveMin :=
    Q_Plant/V_EtUpMin/W_EtMin if Q_Plant/V_EtUpMin/W_EtMin + 2*(L_EtHopperMin/2 + ConRadius(ND_EtDrain) + S_Fitting + T_EtHopperLedge) < L_Sed
    "null" otherwise
# need to define as null for now because need some equations below to calculate for case when L.Et = L.Sed
# ensures at least 1 full hopper, use max length to minimize #hoppers
N_EtFullHopper :=
    Ceil((L_EtCaptureEffectiveMin + T_EtHopperLedge)/(L_EtHopperMax + T_EtHopperLedge), 1) if L_EtCaptureEffectiveMin ≠ "null"
    Ceil((L_EtMax - 2*(L_EtHopperMin/2 + ConRadius(ND_EtDrain) + S_Fitting))/(L_EtHopperMax + T_EtHopperLedge), 1) otherwise
L_EtHopper := max(L_EtHopperMin, {
    (L_EtCaptureEffectiveMin - N_EtFullHopper*T_EtHopperLedge)/N_EtFullHopper if L_EtCaptureEffectiveMin ≠ "null"
    (L_EtMax - 2*ConRadius(ND_EtDrain) - 2*S_Fitting - T_EtHopperLedge*(N_EtFullHopper + 1))/(N_EtFullHopper + 1) otherwise
}) = 1.16876 m  # when we go to L.EtHopperMin we sacrifice 45 deg slope
L_Et0 :=
    L_Sed if L_EtCaptureEffectiveMin == "null"
    N_EtFullHopper*L_EtHopper + (N_EtFullHopper + 1)*T_EtHopperLedge + 2*(L_EtHopper/2 + ConRadius(ND_EtDrain) + S_Fitting) otherwise
    = 2.83912 m
L_EtCaptureEffective :=
    L_EtCaptureEffectiveMin if L_EtCaptureEffectiveMin ≠ "null"
    (L_Et0 - L_EtHopper/2 - ConRadius(ND_EtDrain) - S_Fitting) otherwise
H_EtHopper := min((L_EtHopper - 2*(ConRadius(ND_EtDrain) + S_Fitting))/2*tan(AN_EtSlopeMax), H_EtHopperMax)
AN_EtSlope := atan(H_EtHopper/(L_EtHopper/2 - S_Fitting - ConRadius(ND_EtDrain))) = 45 deg
W_EtCapture := Q_Plant/V_EtUpMin/(L_Et0 - 1/2*L_EtHopper - (S_Fitting + ConRadius(ND_EtDrain))) = 0.232133 m
W_Et0 := max(W_EtMin, W_EtCapture)
V_EtUp := Q_Plant/(W_Et0*(L_Et0 - 1/2*L_EtHopper - (S_Fitting + ConRadius(ND_EtDrain))))
HW_Et0 := H_EtHopper + HL_Flowmeasure
H_EtTop := HL_Flowmeasure + H_PlantFreeboard
H_Et0 := HW_Et0 + H_PlantFreeboard
L_EtHopperFront := L_EtSupport - (T_PlantWall - T_ChannelWall)
H_EtHopperFront := min(H_EtHopper, tan(AN_EtSlope)*L_EtHopperFront)
L_EtHopperBack := W_Et0 - 2*S_Fitting - 2*ConRadius(ND_EtDrain) - L_EtHopperFront = 0.7516 m
H_EtHopperBack := min(H_EtHopper, tan(AN_EtSlope)*L_EtHopperBack) = 0.48358 m
AN_EtHopperBackSlope := atan(H_EtHopperBack/L_EtHopperBack) = 32.7573 deg
AN_EtHopperFrontSlope := atan(H_EtHopperFront/L_EtHopperFront) = 45 deg
# Overflow Channel
W_EtOverflowSlot := innerdiameter(ND_EtOverflowDrain, PS_Default)*sin(acos(1 - 2*0.9)) = 4.89204 cm
# This sizes the slot such that only 10% of the vertical dimension of the pipe is cut away.
L_EtChannelPipesMin :=
    (0.5*(L_EtHopper/2 + ConRadius(ND_EtDrain) + S_Fitting) - ShortTeeLength(ND_EtOverflowDrain) - CapThickness(ND_EtOverflowDrain)) if EN_EtGrit == 0
    W_rectweir(Q_Plant, 5 cm)/2 otherwise
    = 0.250515 m
L_EtOverflowWeirMin :=
    (2*(L_EtHopper/2 + ConRadius(ND_EtDrain) + S_Fitting)) if EN_EtGrit == 0
    (2*L_EtChannelPipesMin) otherwise
    = 1.37036 m
H_EtOverflowCutaway := 0.1*innerdiameter(ND_EtOverflowDrain, PS_Default) = 0.321 in
H_EtLFOMtoOverflow := 3 cm
# Overflow Channel Two Inlets
# this section is altered but nothing was highlighted or commented. I highlighted what was different
W_EtOverflowSlot := innerdiameter(ND_EtOverflowDrain, PS_Default)*sin(acos(1 - 2*0.9)) = 4.89204 cm
# This sizes the slot such that only 10% of the vertical dimension of the pipe is cut away.
L_EtChannelPipesMin := W_rectweir(Q_Plant, 5 cm)/2
L_EtChannelPipesMin :=
    (0.5*(L_EtHopper/2 + ConRadius(ND_EtDrain) + S_Fitting) - ShortTeeLength(ND_EtOverflowDrain) - CapThickness(ND_EtOverflowDrain)) if EN_EtGrit == 0
    W_rectweir(Q_Plant, 5 cm)/2 otherwise
    = 0.250515 m
L_EtChannelPipesMax := 0.5*(L_EtHopper/2 + ConRadius(ND_EtDrain) + S_Fitting) - ShortTeeLength(ND_EtOverflowDrain) - CapThickness(ND_EtOverflowDrain)
# WHAT is this / where did it come from?? Amy, you put this in? Comment so we know why its here
L_EtChannelPipes := min(L_EtChannelPipesMin, L_EtChannelPipesMax)
L_EtOverflowWeirMin :=
    (2*(L_EtHopper/2 + ConRadius(ND_EtDrain) + S_Fitting)) if EN_EtGrit == 0
    (2*L_EtChannelPipesMin) otherwise
    = 1.37036 m
H_EtOverflowCutaway := 0.1*innerdiameter(ND_EtOverflowDrain, PS_Default) = 0.321 in
H_EtLFOMtoOverflow := 3 cm
# Length, Width, and Height Calculations (no grit =1)
W_Et1 := max(L_EtChannelPipesMin, 2*ConRadius(ND_EtFloat) + S_EtFloat + 2*ConRadius(ND_RMPipe) + 3*S_Fitting) = 0.615125 m
L_EtChannelPipes1 := W_Et1
L_EtOverflowWeir1 := 2*L_EtChannelPipes1
A_EntranceFlow := 1.1*π/4*D_pipe(Q_Plant, AvailND, HL_Flowmeasure + S_Fitting + H_EtLFOMtoOverflow, HL_Flowmeasure + S_Fitting + H_EtLFOMtoOverflow, Nu_Water, E_Concrete, K_PipeEnt)^2
S_EtBaffleBottom := max(10 cm, A_EntranceFlow/W_Et1)
S_EtBaffle := max(A_EntranceFlow/W_Et1, 2*ConRadius(ND_EtInlet) + 2*S_Fitting) = 0.228587 m
HL_EtBaffle := K_FlocBaffle*(Q_Plant/(S_EtBaffle*W_Et1))^2/(2*g)
L_Et1 := 2*(S_Fitting + ConRadius(ND_RMPipe)) + ElbowRadius(ND_EtOverflowDrain) + SocketDepth(ND_EtOverflowDrain) + ConRadius(ND_EtOverflowDrain) + S_Fitting + T_ConcreteMin + S_EtBaffle = 0.768275 m
HW_Et1 := HL_Flowmeasure + S_Fitting + 2*CapHeight(ND_EtFloat)
H_Et1 := HL_EtBaffle + HW_Et1 + H_PlantFreeboard = 0.673953 m
W_Et :=
    W_Et0 if EN_EtGrit == 0
    W_Et1 otherwise
L_EtOverflowWeir :=
    L_EtOverflowWeirMin if EN_EtGrit == 0
    L_EtOverflowWeir1 otherwise
H_Et :=
    H_Et0 if EN_EtGrit == 0
    H_Et1 otherwise
L_Et :=
    L_Et0 if EN_EtGrit == 0
    L_Et1 otherwise
HW_Et :=
    HW_Et0 if EN_EtGrit == 0
    HW_Et1 otherwise
L_EtChannelPipes :=
    L_EtChannelPipesMin if EN_EtGrit == 0
    L_EtChannelPipes1 otherwise
H_EtWaterRise := Headloss_weir(Q_Plant, L_EtOverflowWeir) + H_EtLFOMtoOverflow = 4.35041 cm
# This is a conservative (high) estimate of the amount of freeboard which will be used up by the water level rise if double the plant capacity is flowing into the entrance tank (does not take into account the fraction of the additional flow which will flow through the LFOM due to the higher water level)
# Heights and Elevations
D_RMOrifice := D_PipeED(E_MaxRM, Q_Plant, Pi_VenaContractaOrifice, Pi_Jet) = 0.0885232 m
HL_RMMicroOrifice := h_orifice(D_RMOrifice, Pi_VenaContractaOrifice, Q_Plant) = 5.42601 cm
# estimate the length of RM pipe using:2*HW_EtMax + W_EtWalkway
HL_RMPipe :=
    h_l(Q_Plant, innerdiameter(ND_RMPipe, PS_Default), 2*HW_EtMax + W_EtWalkway, K_El90 + K_PipeExit, Nu_Water, E_Pvc) if Q_Plant > Q_PlantMaxLF
    h_l(Q_Plant, innerdiameter(ND_RMPipe, PS_Default), 2*HW_EtMax + W_EtWalkway, 3*K_El90 + K_PipeExit, Nu_Water, E_Pvc) otherwise
# estimate the length of RM pipe using:2*HW_EtMax + W_EtWalkway
ZW_RMPipe := HW_Sed + HL_Floc + HL_RMPipe + HL_RMMicroOrifice = 1.76722 m
# Elevation of the water inside the rapid mix pipe in the Tee outside the entrance tank
ZW_Et := ZW_RMPipe + H_Freefall + HL_Flowmeasure + HL_RMPipe = 2.09812 m
# elevation of the maximum water level in the entrance tank (relative to plant datum)
# This freefall is a safety factor inside the lfom
Z_EtTop := ZW_Et + H_PlantFreeboard = 2.19812 m  # Elevation of the top of the entrance tank walls (includes freeboard)
Z_Et := ZW_Et - HW_Et = 1.41454 m  # This is the elevation of the bottom slab of the entrance tank
# bottom elevation of entrance tank (same as the drain entrance elevation)
Z_EtHopper := Z_Et + H_EtHopper = 1.89812 m  # Top elevation of the first set of hoppers. (The peak of the pyramid)
Z_RmMicroMix := Z_SedWeirExit
# This is the maximum elevation of the micromix plate to ensure that it is submerged until the plant flow stops. Since we are putting the plate in the flocculator entrance coupling this should not be an issue.
# Linear case
Z_LfomOrifices := ZW_Et - HL_Flowmeasure + D_LfomOrifices/2
# elevation centers of the bottom orifices of the LFOM. The bottom of the bottom row of orifices is at the zero elevation
# Hopper Drains (grit only)
ND_EtDrain = 3 in
# Currently the drains are always set to 3in nominal diameter, but we are saving these calculations which design the drains more thoroughly.
Q_EtHopper := L_EtHopper*W_Et*H_EtHopper/(2*Ti_EtDrain)  # estimates the max flow out of each Hopper during cleaning
ND_EtDrainBetter := max(D_pipeschedule(Q_EtHopper, PS_Default, HW_Et, L_Et, Nu_Water, E_Pvc, K_PipeExit + K_PipeEnt), ND_EtDrainMin)
# Although this calculation is approximate it is adequate for designing the drains.
# Doser Elevations
ZW_CdcCht := Z_EtTop + H_DoserAssembly = 2.26582 m  # End of doser tube elevation at zero flow. (also fluid level in constant head tank)
Z_CdcFloatValveOrifice := ZW_CdcCht + H_CdcFloatvalve = 2.31582 m
Z_CoagulantOutlet := Z_CdcFloatValveOrifice + H_CoagTankAboveHeadTank = 2.61582 m  # This is the height of the outlet from the stock tanks
Z_CoagulantTankBottom := Z_CoagulantOutlet - B_StockOutlet = 2.51582 m  # This is the height of the coagulant stock tank base
## Trash Racks
N_TRSpacesV := ceil((W_Et + 4*D_Rebar)/(D_LfomOrifices/sqrt(2) + D_Rebar))  # number of spaces between rebar spanning the width of the entrance tank
B_EtRebar := (W_Et + 3*D_Rebar)/N_TRSpacesV = 0.0235814 m
# number of spaces between rebar spanning the heigth of the top of the entrance tank
N_TRSpacesH := ceil((H_EtTop - H_PlantFreeboard/2 + 2*D_Rebar)/B_EtRebar)
# Coagulant Stock Tank Elevation
Z_CoagTank := Z_EtTop + H_CoagTankAboveHeadTank + H_DoserAssembly - B_StockOutlet
Z_CoagTankOutlet := Z_CoagTank + B_StockOutlet
# Drain Channel (grit only)
Q_EtDCMax := max(Q_Plant, Q_pipeminor(innerdiameter(ND_EtDrain, PS_Default), H_Et, K_PipeEnt + K_PipeExit)*(N_EtFullHopper + 1)) = 33.4248 L/s
L_EtDC := L_Et - 2*(S_Fitting + ConRadius(ND_RMPipe))
W_EtDCOLD := max(2*ConRadius(ND_RMPipe), W_Et - max(OuterDiameterFittingPVC(ND_RMPipe) + 2*S_Fitting + T_PlantWall, S_Fitting + ConRadius(ND_EtOverflowDrain) + ElbowRadius(ND_EtOverflowDrain) + SocketDepth(ND_EtOverflowDrain))) = 0.974613 m
W_EtDC :=
    max(3*S_Fitting + 2*ConRadius(ND_EtDrain) + 2*ConRadius(ND_EtOverflowDrain), 2*ConRadius(ND_RMPipe)) if EN_TwoInlets == 0
    max(4*S_Fitting + 4*ConRadius(ND_EtDrain) + 2*T_EtRemovableWallSupport + T_EtRemovableWall) otherwise
    = 0.5532 m
# Added here conidition for drain channel to accomodate the 2 inlet option width
H_EtDCMinFittingsOLD := max(OuterDiameterFittingPVC(ND_EtOverflowDrain), OuterDiameterFittingPVC(ND_EtFlowControl)) = 0.1016 m
H_EtDCMinFittings := OuterDiameterFittingPVC(ND_EtFlowControl) = 0.1016 m
H_EtDCMinCapacity := H_HorizChannelMin(Q_EtDCMax, W_EtDC, L_EtDC, Nu_Water, E_Concrete, 1) = 0.112532 m
H_EtDC :=
    max(H_EtDCMinCapacity, H_EtDCMinFittings, 2*ConRadius(ND_RMPipe)) if Z_FlocTank + 2*S_Fitting + OuterDiameterFittingPVC(ND_RMPipe) ≤ Z_Et - T_PlantWall - max(H_EtDCMinCapacity, H_EtDCMinFittings, 2*ConRadius(ND_RMPipe)) - T_ChannelWall
    (Z_Et - Z_FlocTank - T_PlantWall) otherwise
    = 0.128587 m
# estimate 1/3 of back slope does not overlap with side slopes
# Other Parameters
Ti_Et0 := (W_Et*L_Et*HW_Et - ((N_EtFullHopper + 1)*0.5*H_EtHopper*W_Et*(L_EtHopper/2 - S_Fitting - ConRadius(ND_EtDrain)) - 1/3*H_EtHopperBack*L_Et*(W_Et - 2*(S_Fitting + ConRadius(ND_EtDrain)))))/Q_Plant
Ti_Et1 := HW_Et*L_Et*W_Et/Q_Plant
Ti_Et :=
    Ti_Et0 if EN_EtGrit == 0
    Ti_Et1 otherwise
.
