Q_Plant := 100*L/s
# [reference: ExpertInputs.xmcd]
# [reference: MathFunctions.xmcd]
# [reference: PipeDatabase.xmcd]
# [reference: FluidsFunctions.xmcd]
# [reference: SedimentationTank.xmcd]
# [reference: Flocculator.xmcd]
# [reference: LFOMvlk24.xmcd]
# Changes for high flow highlighted in yellow
# Entrance Tank
# Flow Control Drain and Entrance Tank Walkway
# This feature is a pipe with a gate valve draining into the entrance tank drain channel from a pipe out of the entrance tank's first hopper. The purpose is to control the plant flow by wasting a certain amount of the influent. The operator will need to learn empirically how many turns of the valve handle will give the desired flow rates, which he will read off of a scale in the entrance tank.
HW_EtEst := 0.8 m
L_EtFlowControlPipeEst := 2 m
ND_EtFlowControl := D_pipeschedule(Q_Plant, PS_Default, HW_EtEst, L_EtFlowControlPipeEst, Nu_Water, E_Pvc, K_PipeExit + K_PipeEnt + K_GateValve + 2*K_El90) = 10 in
W_EtWalkway := max(W_EtWalkwayMin, 2*MaleAdapterLength(ND_EtFlowControl) + ValveLength(ND_EtFlowControl) - 2*ValveSocket(ND_EtFlowControl) + ElbowRadius(ND_EtFlowControl) + SocketDepth(ND_EtFlowControl) + ConRadius(ND_EtFlowControl) + S_Fitting) = 1.27572 m
ND_EtOverflowDrain := D_PipeChannel(Q_Plant/2, PS_Default) = 12 in
# Rapid mix pipe(s) calculations for high flow
L_RMPipeEst := W_EtWalkway = 1.27572 m
K_RMPipe := K_El90 + K_PipeEnt + K_PipeExit = 2.4
HL_RMPipeMax := HL_FiEntrancePipeMax = 0.1 m
ND_SingleRMPipeMax := FloorNearest(Pipesizes[index(FloorNearest(S_FlocBaffle[0], Pipesizes[:, 1]), Pipesizes[:, 1]), 0], AvailND) = 24 in
ND_RMPipeHF := min(D_pipeschedule(min(Q_Plant, Q_pipetotal(innerdiameter(AvailND[last(AvailND)], PS_Default), HL_RMPipeMax, L_RMPipeEst, Nu_Water, E_Pvc, K_RMPipe)), PS_Default, HL_RMPipeMax, L_RMPipeEst, Nu_Water, E_Pvc, K_RMPipe), ND_SingleRMPipeMax) = 20 in
N_RMPipesHF := ceil(Q_Plant/Q_pipetotal(innerdiameter(ND_RMPipeHF, PS_Default), HL_RMPipeMax, L_RMPipeEst, Nu_Water, E_Pvc, K_RMPipe)) = 1
Q_RMPipeHF := Q_Plant/N_RMPipesHF = 100 L/s
HL_RMPipeHF := h_l(Q_RMPipeHF, innerdiameter(ND_RMPipeHF, PS_Default), L_RMPipeEst, K_RMPipe, Nu_Water, E_Pvc) = 4.26578 cm
D_RMOrifice := D_PipeED(E_MaxRM, Q_Plant, Pi_VenaContractaOrifice, Pi_Jet) = 0.354526 m
HL_RMMicroOrifice := h_orifice(D_RMOrifice, Pi_VenaContractaOrifice, Q_Plant) = 13.6111 cm
HL_RapidMix := HL_RMPipeHF + HL_RMMicroOrifice = 0.178768 m
# Rapid mix channel calculations for super high flow
L_RMChannel := W_EtWalkway - T_PlantWall
ZW_RMChannel := HW_Sed + HL_Floc = 2.04433 m
# Based on the assumption that the LFOM channel will be square.
HW_LfomChannel == H_HorizChannelΠ(Q_Plant, 1, HL_ChannelMax, L_LfomChannel, Nu_Water, E_Concrete, 0)
Z_RMChannelBottom := Z_FlocTank + 0.75*H_Floc = 1.60825 m  # needs to be corrected!!!
H_LfomChannel == HW_LfomChannel + HL_Lfom + H_PlantFreeboard
HW_RMChannel := ZW_RMChannel - Z_RMChannelBottom = 0.436082 m
W_LfomChannel == W_HorizChannelΠ(Q_Plant, 1, HL_ChannelMax, L_LfomChannel, Nu_Water, E_Concrete, 0)
W_RMChannelMax := S_FlocBaffle[0]
HW_RMChannel == HW_LfomChannel - HL_ChannelMax
W_RMChannelMin := max(W_DeepChannelMin, W_HorizChannel(Q_Plant, HW_RMChannel, HL_ChannelMax, L_RMChannel, Nu_Water, E_Concrete, 0))
W_RMChannel := min(W_RMChannelMax, W_RMChannelMin) = 0.3 m
HW_RMChannel := H_HorizChannel(Q_Plant, W_RMChannel, HL_ChannelMax, L_RMChannel, Nu_Water, E_Concrete, 0) = 0.399995 m
# iterate to reduce height if width contrained by constructability
W_RMChannel := W_HorizChannel(Q_Plant, HW_RMChannel, HL_ChannelMax, L_RMChannel, Nu_Water, E_Concrete, 0) = 0.299989 m
HL_RMChannel := h_lrect(Q_Plant, W_RMChannel, HW_RMChannel, L_RMChannel, K_90, Nu_Water, E_Concrete, 1) = 1.69032 cm
H_RMChannel := H_LfomChannel
Z_RMChannelBottom := HW_Sed + HL_Floc + HL_LfomRM + H_PlantFreeboard - H_RMChannel
ZW_RMChannel := Z_RMChannelBottom + HW_RMChannel
# Rapid mix culvert calculations for super high flow
L_RMChannel := W_EtWalkway - T_PlantWall
# Based on the assumption that the LFOM channel will be square.
HW_LfomChannel == H_HorizChannelΠ(Q_Plant, 1, HL_ChannelMax, L_LfomChannel, Nu_Water, E_Concrete, 0)
ZW_RMChannel := HW_Sed + HL_Floc = 2.04433 m
H_LfomChannel == HW_LfomChannel + HL_Lfom + H_PlantFreeboard
Z_RMChannelBottom := Z_FlocTank + 0.75*H_Floc = 1.60825 m  # needs to be corrected!!!
W_LfomChannel == W_HorizChannelΠ(Q_Plant, 1, HL_ChannelMax, L_LfomChannel, Nu_Water, E_Concrete, 0)
HW_RMChannel := ZW_RMChannel - Z_RMChannelBottom = 0.436082 m
HW_RMChannel == HW_LfomChannel - HL_ChannelMax
HW_RMChannel := H_HorizChannel(Q_Plant, W_RMChannel, HL_ChannelMax, L_RMChannel, Nu_Water, E_Concrete, 0) = 0.400008 m
# iterate to reduce height if width contrained by constructability
W_RMChannel := W_HorizChannel(Q_Plant, HW_RMChannel, HL_ChannelMax, L_RMChannel, Nu_Water, E_Concrete, 0) = 0.299977 m
HL_RMChannel := h_lrect(Q_Plant, W_RMChannel, HW_RMChannel, L_RMChannel, K_90, Nu_Water, E_Concrete, 1) = 1.69034 cm
H_RMChannel := H_LfomChannel
Z_RMChannelBottom := HW_Sed + HL_Floc + HL_LfomRM + H_PlantFreeboard - H_RMChannel
ZW_RMChannel := Z_RMChannelBottom + HW_RMChannel
W_RMCulvertMax := S_FlocBaffle[0]
W_RMChannelMin := W_HorizChannel(Q_Plant, HW_RMChannel, HL_ChannelMax, L_RMChannel, Nu_Water, E_Concrete, 0)  # need to change to model closed channel flow
W_RMChannel := min(W_RMChannelMax, W_RMChannelMin) = 0.299977 m
# LFOM channel calculations for high flow
L_LfomChannelOrifices := (D_LfomOrifices + S_LfomOrificesMin)*(N_LfomOrifices[0] + 1) + 2*T_ConcreteMin
L_LfomChannelHopper := □  # error: This placeholder is empty.
L_LfomChannel := max(L_LfomChannelOrifices)
W_LfomChannel := max(W_DeepChannelMin, 2*ConRadius(ND_RMPipeHF) + 2*S_Fitting)
HW_LfomChannel := H_HorizChannel(Q_Plant, W_LfomChannel, HL_ChannelMax, L_LfomChannel, Nu_Water, E_Concrete, 0)
HL_LfomChannel := h_frect(Q_Plant, W_LfomChannel, HW_LfomChannel, L_LfomChannel, Nu_Water, E_Concrete, 1)  # manifold?????????
ZW_LfomChannel := HW_Sed + HL_Floc + HL_RapidMix + 5 cm = 2.2731 m
Z_LfomChannelBottom := HW_Sed + HL_Floc + HL_RapidMix
HW_LfomChannel == ZW_LfomChannel - Z_LfomChannelBottom =  # error: This variable is undefined.
W_ChannelMin := 15 cm  # Minimum channel width for constructability
H_LfomChannel := HW_LfomChannel + H_Freefall + HL_Lfom + H_PlantFreeboard
W_DeepChannelMin := 30 cm  # Minimum channel width for a deep channel. Assumes you may need to stick your head in the channel.
3.059 m
# The maximum depth of a channel, based on having your arm reach to the bottom of the channel.
H_DeepChannelMax := 60 cm
W_HumanMin = 0.54 m
W_LfomChannelMin == W_HorizChannel(Q_Plant, HW_LfomChannel, HL_ChannelMax, L_LfomChannel, Nu_Water, E_Concrete, 0) =  # error
h_frect(Q, w, b, L, ν, ε, open) := f_rect(Q, w, b, ν, ε, open)*L/(4*R_h(w, b, open))*Q^2/(2*g*(w*b)^2)
f_rect(Q_Plant, W_LfomChannelMin, HW_LfomChannel, Nu_Water, E_Concrete, 1) =  # error
# Why is the head loss calculation for the channel so much lower than HL.ChannelMax if the dimension calculations are constrained by HL.ChannelMax???????????
HL_LfomChannel := h_frect(Q_Plant, W_LfomChannel, HW_LfomChannel, L_LfomChannel, Nu_Water, E_Concrete, 1)
h_lrect(Q, w, b, L, K, ν, ε, open) := h_erect(Q, w, b, K) + h_frect(Q, w, b, L, ν, ε, open)
H_LfomChannel := HW_LfomChannel + H_Freefall + HL_Lfom + H_PlantFreeboard
HL_LfomRM := HL_Lfom + H_Freefall + HL_LfomChannel + HL_RapidMix + HL_RMChannel
H_HorizChannel(Q, W_Channel, ΔH, L_Channel, ν, ε, manifold)
W_HorizChannel(Q, H, ΔH, L_Channel, ν, ε, manifold)
H_LfomChannel == H_DeepChannelMax
HW_LfomChannel == H_LfomChannel - H_Freefall - HL_Lfom - H_PlantFreeboard
W_LfomChannel == W_HorizChannel(Q_Plant, HW_LfomChannel, HL_ChannelMax, L_LfomChannel, Nu_Water, E_Concrete, 0)
# Length, Width, and Hopper Calculations
W_EtDCMinRMFit := max(W_EtDCMin, 2*ConRadius(ND_RMPipe)) = 0.352425 m
W_EtFloatDrainLFOM := 2*ConRadius(ND_EtFloat) + 2*S_EtFloat + 2*ConRadius(ND_RMPipe) + 2*S_Fitting + 2*ConRadius(ND_EtDrain) = 0.990563 m
W_EtDCLFOM := W_EtDCMinRMFit + T_PlantWall + S_Fitting + OuterDiameterFittingPVC(ND_RMPipe) + S_Fitting = 0.95485 m
W_EtDCOverflow := W_EtDCMinRMFit + SocketDepth(ND_EtOverflowDrain) + ElbowRadius(ND_EtOverflowDrain) + ConRadius(ND_EtOverflowDrain) + S_Fitting = 1.11184 m
W_EtFloatChannel := 2*ConRadius(ND_EtFloat) + 2*S_EtFloat + W_LfomChannel + T_ChannelWall = 1.2247 m
W_EtFloatChannelDrain := 2*ConRadius(ND_EtFloat) + 2*S_EtFloat + W_LfomChannel + T_ChannelWall + 2*S_Fitting + 2*ConRadius(ND_EtDrain) = 1.4263 m
W_EtMin :=
    max(W_HumanMin, W_EtFloatDrainLFOM, W_EtDCLFOM, W_EtDCOverflow) if EN_LfomPipe == 1
    max(W_HumanMin, W_EtFloatChannelDrain, W_EtDCOverflow) otherwise
    = 1.11184 m  # Minimum width to satisfy geometric constraints
L_EtMax := L_Sed  # maximum length to prevent enlarging the plant footprint
H_EtHopperMin :=
    (35 cm) if Q_Plant ≤ 3*L/s
    (50 cm) otherwise  # so that the hoppers aren't so small that they need to be drained frequently
H_EtHopperMax := HW_EtMax - HL_Flowmeasure  # so that the entrance tank doesn't get too deep
L_EtHopperMax := min(2*(H_EtHopperMax/tan(AN_EtSlopeMax) + ConRadius(ND_EtDrain) + S_Fitting), (L_EtMax - mod(EN_LfomPipe + 2, 2)*(2*ConRadius(ND_EtDrain) + 2*S_Fitting) - L_LfomChannel*mod(EN_LfomPipe + 1, 2) - 2*T_EtHopperLedge)/2)
# Even though I included plumbing here, it should never constrain the length
L_EtHopperMin := min(L_EtHopperMax, max(2*(H_EtHopperMin/tan(AN_EtSlopeMax) + S_Fitting + ConRadius(ND_EtDrain)), 2*(OuterDiameterFittingPVC(ND_RMPipe) - ConRadius(ND_EtDrain) + S_Fitting), 2*(S_EtFloat + ConRadius(ND_EtFloat))))
# if the min is larger than the max, we sacrifice capacity, assuming the plumbing is never constraining
# Required length of the *full* hoppers to meet the capture velocity requirement, assuming min width:
L_EtCaptureEffectiveMin :=
    Q_Plant/V_EtUpMin/W_EtMin if Q_Plant/V_EtUpMin/W_EtMin + mod(EN_LfomPipe + 4, 3)*(L_EtHopperMin/2 + ConRadius(ND_EtDrain) + S_Fitting + T_EtHopperLedge) + (L_LfomChannel + T_EtHopperLedge + ConRadius(ND_EtDrain) + S_Fitting)*mod(EN_LfomPipe + 1, 2) < L_Sed
    "null" otherwise
# need to define as null for now because need some equations below to calculate for case when L.Et = L.Sed
# ensures at least 1 full hopper, use max length to minimize #hoppers
N_EtFullHopper :=
    Ceil((L_EtCaptureEffectiveMin + T_EtHopperLedge)/(L_EtHopperMax + T_EtHopperLedge), 1) if L_EtCaptureEffectiveMin ≠ "null" and L_EtCaptureEffectiveMin - (floor((L_EtCaptureEffectiveMin + T_EtHopperLedge)/(L_EtHopperMax + T_EtHopperLedge)) - 1)*T_EtHopperLedge ≤ L_EtCaptureEffectiveMin
    max(floor((L_EtCaptureEffectiveMin + T_EtHopperLedge)/(L_EtHopperMax + T_EtHopperLedge)), 1) if L_EtCaptureEffectiveMin ≠ "null" and L_EtCaptureEffectiveMin - (floor((L_EtCaptureEffectiveMin + T_EtHopperLedge)/(L_EtHopperMax + T_EtHopperLedge)) - 1)*T_EtHopperLedge > L_EtCaptureEffectiveMin
    Ceil((L_EtMax - mod(EN_LfomPipe + 4, 3)*(L_EtHopperMin/2 + ConRadius(ND_EtDrain) + S_Fitting) - (L_LfomChannel + ConRadius(ND_EtDrain) + S_Fitting)*mod(EN_LfomPipe + 1, 2))/(L_EtHopperMax + T_EtHopperLedge), 1) otherwise
L_EtHopper := max(L_EtHopperMin, {
    (L_EtCaptureEffectiveMin - N_EtFullHopper*T_EtHopperLedge)/N_EtFullHopper if L_EtCaptureEffectiveMin ≠ "null"
    (L_EtMax - 2*ConRadius(ND_EtDrain) - 2*S_Fitting - T_EtHopperLedge*(N_EtFullHopper + 1))/(N_EtFullHopper + 1) otherwise
})
# when we go to L.EtHopperMin we sacrifice 45 deg slope
L_EtHopper := max(L_EtHopperMin, {
    (L_EtCaptureEffectiveMin - N_EtFullHopper*T_EtHopperLedge)/N_EtFullHopper if L_EtCaptureEffectiveMin ≠ "null"
    (L_EtMax - (2*ConRadius(ND_EtDrain) + 2*S_Fitting) - T_EtHopperLedge*(N_EtFullHopper + 1) - L_LfomChannel*mod(EN_LfomPipe + 1, 2))/(N_EtFullHopper + 1) otherwise
})
L_Et :=
    L_Sed if L_EtCaptureEffectiveMin == "null"
    N_EtFullHopper*L_EtHopper + (N_EtFullHopper + 1)*T_EtHopperLedge + 2*(L_EtHopper/2 + ConRadius(ND_EtDrain) + S_Fitting) otherwise
L_Et :=
    L_Sed if L_EtCaptureEffectiveMin == "null"
    N_EtFullHopper*L_EtHopper + (N_EtFullHopper + 1)*T_EtHopperLedge + mod(EN_LfomPipe + 4, 3)*(L_EtHopper/2 + ConRadius(ND_EtDrain) + S_Fitting) + L_LfomChannel*mod(EN_LfomPipe + 1, 2) otherwise
L_EtCaptureEffective :=
    L_EtCaptureEffectiveMin if L_EtCaptureEffectiveMin ≠ "null"
    (L_Et - mod(EN_LfomPipe + 4, 3)*(L_EtHopper/2 + ConRadius(ND_EtDrain) + S_Fitting) - (L_LfomChannel + ConRadius(ND_EtDrain) + S_Fitting)*mod(EN_LfomPipe + 1, 2)) otherwise
L_EtCaptureEffective := L_Et - mod(EN_LfomPipe + 4, 3)*(L_EtHopper/2 + ConRadius(ND_EtDrain) + S_Fitting) - (L_LfomChannel + ConRadius(ND_EtDrain) + S_Fitting)*mod(EN_LfomPipe + 1, 2)
H_EtHopper := min((L_EtHopper - 2*(ConRadius(ND_EtDrain) + S_Fitting))/2*tan(AN_EtSlopeMax), H_EtHopperMax)
AN_EtSlope := atan(H_EtHopper/(L_EtHopper/2 - S_Fitting - ConRadius(ND_EtDrain)))
W_EtCapture := Q_Plant/V_EtUpMin/L_EtCaptureEffective
W_Et := max(W_EtMin, W_EtCapture)
V_EtUp := Q_Plant/(W_Et*L_EtCaptureEffective)
HW_Et := H_EtHopper + HL_Flowmeasure
H_EtTop := HL_Flowmeasure + H_PlantFreeboard
H_Et := HW_Et + H_PlantFreeboard
H_EtHopperBack := min(H_EtHopper, tan(AN_EtSlope)*(W_Et - 2*(ConRadius(ND_EtDrain) + S_Fitting)))
L_EtHopperBack := W_Et - 2*S_Fitting - 2*ConRadius(ND_EtDrain)
AN_EtHopperBackSlope := atan(H_EtHopperBack/L_EtHopperBack)
# Overflow Channel
W_EtOverflowSlot := innerdiameter(ND_EtOverflowDrain, PS_Default)*sin(acos(1 - 2*0.9)) = 17.846 cm
# This sizes the slot such that only 10% of the vertical dimension of the pipe is cut away.
L_EtChannelPipes := (L_EtHopper/2 + ConRadius(ND_EtDrain) + S_Fitting - 2*CapThickness(ND_EtOverflowDrain) - TeeLength(ND_EtOverflowDrain))/2
L_EtOverflowWeir := 2*(L_EtHopper/2 + ConRadius(ND_EtDrain) + S_Fitting - 2*CapThickness(ND_EtOverflowDrain))
H_EtOverflowCutaway := 0.1*innerdiameter(ND_EtOverflowDrain, PS_Default) = 1.171 in
H_EtLFOMtoOverflow := 3 cm
H_EtWaterRise := Headloss_weir(Q_Plant, L_EtOverflowWeir) + H_EtLFOMtoOverflow
# This is a conservative (high) estimate of the amount of freeboard which will be used up by the water level rise if double the plant capacity is flowing into the entrance tank (does not take into account the fraction of the additional flow which will flow through the LFOM due to the higher water level)
# Heights and Elevations
E_MaxRM := E_MaxRM/4
D_RMOrifice := D_PipeED(E_MaxRM, Q_Plant, Pi_VenaContractaOrifice, Pi_Jet) = 0.432172 m
HL_RMMicroOrifice := h_orifice(D_RMOrifice, Pi_VenaContractaOrifice, Q_Plant) = 6.16393 cm
HL_RapidMix := HL_RMMicroOrifice
HL_RMPipe := h_l(Q_Plant, innerdiameter(ND_RMPipe, PS_Default), 2*HW_EtMax + W_EtWalkway, K_El90 + K_PipeExit, Nu_Water, E_Pvc)
# estimate the length of RM pipe using:2*HW_EtMax + W_EtWalkway
ZW_RMPipe := HW_Sed + HL_Floc + HL_RMPipe + HL_RMMicroOrifice = 2.3329 m  # Elevation of the water inside the rapid mix pipe in the Tee outside the entrance tank
# Elevation of the water inside the rapid mix pipe in the Tee outside the entrance tank or, in the case of an LFOM channel, elevation of water in the RM channel between the entrance tank and flocculator
ZW_RM := ZW_RMPipe
ZW_Et := ZW_RMPipe + H_Freefall + HL_Flowmeasure + HL_RMPipe = 3.05983 m
# elevation of the maximum water level in the entrance tank (relative to plant datum)
# This freefall is a safety factor inside the lfom
ZW_Et :=
    (ZW_RM + H_Freefall + HL_Flowmeasure + HL_RMPipe) if EN_LfomPipe == 1
    ZW_LfomChannel + HL_Lfom + H_Freefall + HL_LfomChannel otherwise  # HL.RMPipe included twice?????
Z_EtTop := ZW_Et + H_PlantFreeboard  # Elevation of the top of the entrance tank walls (includes freeboard)
Z_LfomChannelBottom := Z_EtTop - H_LfomChannel
# This is the elevation of the bottom slab of the entrance tank
Z_Et := ZW_Et - HW_Et  # bottom elevation of entrance tank (same as the drain entrance elevation)
Z_EtHopper := Z_Et + H_EtHopper  # Top elevation of the first set of hoppers. (The peak of the pyramid)
ED_Tee := ED_Port(Q_Plant, innerdiameter(ND_RMPipe, PS_Default), Pi_VenaContractaOrifice, Pi_Jet) = 3418.26 mW/kg
# This suggests that the flow through the TEE has a high enough energy dissipation rate to provide rapid mix.
Z_RmMicroMix := Z_SedWeirExit
# This is the maximum elevation of the micromix plate to ensure that it is submerged until the plant flow stops. Since we are putting the plate in the flocculator entrance coupling this should not be an issue.
# Linear case
Z_LfomOrifices := ZW_Et - HL_Flowmeasure + D_LfomOrifices/2
# elevation centers of the bottom orifices of the LFOM. The bottom of the bottom row of orifices is at the zero elevation
# Non Linear Case
Z_PipeGap := ZW_Et - HL_Flowmeasure  # elevation of the orifice gap between pipes that the water flows through
Z_EtExitMax := min(Z_RmMicroMix + TeeLength(ND_RMPipe)/2, ZW_Et - HL_Flowmeasure - S_Fitting - SocketDepth(ND_RMPipe) - ElbowRadius(ND_RMPipe))
# This is MAXIMUM centerline elevation of the pipe exiting the entrance tank. Lower is okay. However, the lower this pipe exits the entrance tank, the more difficult it will be to access the micro mix orifice.
# I am finding the distance between the micromix plate and the centerline of the Tee.
# This is how far below the water level in the rapid mix pipe the orifice plate is located at max plant flow if we use a rapid mix orifice.
HW_RmMicroMix := ZW_RMPipe - Z_RmMicroMix = 0.466757 m
# Hopper Drains
ND_EtDrain = 3 in
# Currently the drains are always set to 3in nominal diameter, but we are saving these calculations which design the drains more thoroughly.
Q_EtHopper := L_EtHopper*W_Et*H_EtHopper/(2*Ti_EtDrain)  # estimates the max flow out of each Hopper during cleaning
ND_EtDrainBetter := max(D_pipeschedule(Q_EtHopper, PS_Default, HW_Et, L_Et, Nu_Water, E_Pvc, K_PipeExit + K_PipeEnt), ND_EtDrainMin)
# Although this calculation is approximate it is adequate for designing the drains.
# Doser Elevations
ZW_CdcCht := Z_EtTop + H_DoserAssembly  # End of doser tube elevation at zero flow. (also fluid level in constant head tank)
Z_CdcFloatValveOrifice := ZW_CdcCht + H_CdcFloatvalve
Z_CoagulantOutlet := Z_CdcFloatValveOrifice + H_CoagTankAboveHeadTank  # This is the height of the outlet from the stock tanks
Z_CoagulantTankBottom := Z_CoagulantOutlet - B_StockOutlet  # This is the height of the coagulant stock tank base
## Trash Racks
N_TRSpacesV := ceil((W_Et + 4*D_Rebar)/(D_LfomOrifices/sqrt(2) + D_Rebar))  # number of spaces between rebar spanning the width of the entrance tank
B_EtRebar := (W_Et + 3*D_Rebar)/N_TRSpacesV
# number of spaces between rebar spanning the heigth of the top of the entrance tank
N_TRSpacesH := ceil((H_EtTop - H_PlantFreeboard/2 + 2*D_Rebar)/B_EtRebar)
# Coagulant Stock Tank Elevation
Z_CoagTank := Z_EtTop + H_CoagTankAboveHeadTank + H_DoserAssembly - B_StockOutlet
Z_CoagTankOutlet := Z_CoagTank + B_StockOutlet
# Drain Channel
Q_EtDCMax := max(Q_Plant, Q_pipeminor(innerdiameter(ND_EtDrain, PS_Default), H_Et, K_PipeEnt + K_PipeExit)*(N_EtFullHopper + 1)) = L/s
L_EtDC := L_Et - 2*(S_Fitting + ConRadius(ND_RMPipe))
W_EtDC := max(2*ConRadius(ND_RMPipe), W_Et - max(OuterDiameterFittingPVC(ND_RMPipe) + 2*S_Fitting + T_PlantWall, S_Fitting + ConRadius(ND_EtOverflowDrain) + ElbowRadius(ND_EtOverflowDrain) + SocketDepth(ND_EtOverflowDrain)))
H_EtDCMinFittings := max(OuterDiameterFittingPVC(ND_EtOverflowDrain), OuterDiameterFittingPVC(ND_EtFlowControl)) = 0.352425 m
H_EtDCMinCapacity := H_HorizChannelMin(Q_EtDCMax, W_EtDC, L_EtDC, Nu_Water, E_Concrete, 1)
Z_Et - Z_FlocTank - T_PlantWall
H_EtDC :=
    max(H_EtDCMinCapacity, H_EtDCMinFittings, 2*ConRadius(ND_RMPipe)) if Z_FlocTank + 2*S_Fitting + OuterDiameterFittingPVC(ND_RMPipe) ≤ Z_Et - T_PlantWall - max(H_EtDCMinCapacity, H_EtDCMinFittings, 2*ConRadius(ND_RMPipe)) - T_ChannelWall
    (Z_Et - Z_FlocTank - T_PlantWall) otherwise
# estimate 1/3 of back slope does not overlap with side slopes
# Other Parameters
Ti_Et := (W_Et*L_Et*HW_Et - ((N_EtFullHopper + 1)*0.5*H_EtHopper*W_Et*(L_EtHopper/2 - S_Fitting - ConRadius(ND_EtDrain)) - 1/3*H_EtHopperBack*L_Et*(W_Et - 2*(S_Fitting + ConRadius(ND_EtDrain)))))/Q_Plant
# Rapid Mix Parameters
V_RMChannel := Q_Plant/(W_RMChannel*HW_RMChannel) = 0.833378 m/s
ED_RM := E_MaxRM = 0.25 m^2/s^3
L_K := (Nu_Water^3/ED_RM)^(1/4) = 44.7214 μm  # Kolmogorov length scale calculation for quantifying rapid mix
.
