Q_Plant := 200*l/s
method := "EtFlocSedFi"
# Master Expert Inputs
# Design Tool Expert Inputs
# [reference: ExpertInputs.xmcd]
# Math Functions | Revision 6010, imported on February 28th, 2014
index(s, array) :=
    i ← 0
    while s > 1.0005*array[i] and i < last(array)
        i ← i + 1
    return i
FloorNearest(number, array) :=
    x ← number if number ≤ array[0]
    x ← array[last(array)] if number ≥ array[last(array)]
    otherwise
        i ← 0
        while (number > array[i] and i < last(array))
            i ← i + 1
        x ← array[i - 1]
    return x
RoundNearest(number, array) :=
    x ← array[0] if number ≤ array[0] or number ≥ array[last(array)]
    x ← array[last(array)] if number ≥ array[last(array)]
    otherwise
        i ← 0
        while (number > array[i] and i < last(array))
            i ← i + 1
        x ← array[i] if (number - array[i - 1]) > (array[i] - number)
        x ← array[i - 1] otherwise
    return x
CeilNearest(number, array) :=
    x ← array[0] if number ≤ array[0]
    x ← array[last(array)] if number ≥ array[last(array)]
    otherwise
        i ← 0
        while (number > array[i] and i < last(array))
            i ← i + 1
        x ← array[i]
    return x
# These "nearest" functions will return "number" for the case when the number is less than the smallest value in the array or greater than the largest value in the array
ramp(start, interval, range) :=
    for i ∈ 0 .. range/interval - 1
        ramp[i] ← start + i*interval
    return ramp
# Pipe Functions | Revision 6010, imported on February 28th, 2014
# Pipe Specification  Corresponding Index (EN.PipeSpec)  Used for
# Schedule 10 (thin wall)  0
# Schedule 30  1
# Schedule 40  2  (PS.FiBranch)  FiBranch (slotted pipes) (1” and 1.5”)
# Schedule 80  3
# Schedule 120  4
# Schedule 160 (thick wall)  5
# SDR 17 (thick wall)  6 (PS.Modules)*  1/2” and ¾” pipes used for building modules
# SDR 21  7
# SDR 26  8 (PS.Default) Is there a better name?  all pipes larger than ¾” except FiBranch
# SDR 32.5  9
# SDR 41 (thin wall)  10
PS_FiBranch := 2
PS_Modules := 6
PS_Default := 8
# [component: outputs EN_PipeSpecDescription]
# Some of the inner diameters of the pipes are not the same as produced by the script function above, especially for the smaller pipes because making a wall that thin is not practical. Later perhaps we could include a check, that if the wall thickness based on the Avg Inner D. here is greater than one used we can use this ID. Do not have data for all choices.
CountryPipes := [
    1, 0;
    1, 0;
    1, 0;
    1, 1;
    1, 1;
    1, 1;
    0, 0;
    1, 1;
    1, 1;
    0, 0;
    1, 1;
    0, 0;
    1, 1;
    0, 0;
    1, 1;
    1, 1;
    1, 0;
    1, 1;
    0, 0;
    1, 0;
    0, 1;
    0, 0;
    1, 1;
    1, 1
]
Pipesizes := [
    1/8*in, .405 in;
    1/4*in, .540 in;
    3/8*in, .675 in;
    1/2*in, .840 in;
    3/4*in, 1.050 in;
    1 in, 1.315 in;
    1.25 in, 1.66 in;
    1.5 in, 1.9 in;
    2 in, 2.375 in;
    2.5 in, 2.875 in;
    3 in, 3.5 in;
    3.5 in, 4 in;
    4 in, 4.5 in;
    5 in, 5.563 in;
    6 in, 6.625 in;
    8 in, 8.625 in;
    10 in, 10.75 in;
    12 in, 12.75 in;
    14 in, 14 in;
    15 in, 15 in;
    16 in, 16 in;
    18 in, 18 in;
    20 in, 20 in;
    24 in, 24 in
]
MinWallThickness := [
    .049, .057, .068, .095, 0, 0, 0, 0, 0, 0, 0;
    .065, .073, .088, .119, 0, 0, 0, 0, 0, 0, 0;
    .065, .073, .091, .126, 0, 0, 0, 0, 0, 0, 0;
    .083, .095, .109, .147, .170, .188, 0.675/17, 0, 0, 0, 0;
    .083, .095, .113, .154, .170, .219, 0.072, 0.07, 0, 0, 0;
    .109, .114, .133, .179, .2, .25, 0.087, 0.073, 0.07, 0, 0;
    .109, .117, .14, .191, .215, .25, 0.108, 0.089, 0.074, 0.07, 0;
    .109, .125, .145, .2, .2258, .281, 0.122, 0.100, 0.083, 0.07, 0;
    .109, 0, .154, .218, .25, .344, 0.150, 0.123, 0.101, 0.083, 2.375/41;
    .12, 0, .203, .276, .3, .375, 0.179, 0.147, 0.120, 0.098, 2.875/41;
    .12, 0, .216, .3, .35, .438, 0.219, 0.177, 0.145, 0.118, 0.095;
    0, 0, 0, 0, 0, 0, 0.249, 0.202, 0.164, 0.133, 0.108;
    .12, 0, .237, .337, .437, .531, 0.281, 0.227, 0.183, 0.148, 0.120;
    .134, 0, .258, .375, .5, .625, 0.347, 0.281, 0.228, 0.182, 0.146;
    .134, 0, .28, .432, .562, .719, 0.414, 0.335, 0.271, 0.216, 0.172;
    .148, .277, .322, .5, .718, .906, 0.539, 0.435, 0.352, 0.281, 0.223;
    .165, .307, .365, .5, .843, 1.125, 0.670, 0.542, 0.438, 0.351, 0.278;
    .18, .330, .406, .687, 1, 1.312, 0.795, 0.643, 0.520, 0.416, 0.330;
    .25, .375, .437, .75, 1.093, 1.406, 14/17, 14/21, 0.538, 14/32.5, 14/41;
    0, 0, 0, 0, 0, 0, 15/17, 15/21, 15/26, 15/32.5, 15/41;
    .25, .375, .5, .843, 1.218, 1.593, 16/17, 16/21, 0.615, 16/32.5, 16/41;
    .25, .437, .562, .937, 1.375, 1.781, 18/17, 18/21, 0.692, 18/32.5, 0.439;
    .25, .5, .593, 1.031, 1.5, 1.968, 20/17, 20/21, 0.769, 20/32.5, 0.488;
    .25, .562, .687, 1.218, 1.812, 2.343, 24/17, 24/21, 0.923, 22/32.5, 0.585
]*in
AvgInnerDiameter := [
    0, 0, 0, 0, 0, 0, 0, 0, 0, 0, 0;
    0, 0, 0, 0, 0, 0, 0, 0, 0, 0, 0;
    0, 0, 0, 0, 0, 0, 0, 0, 0, 0, 0;
    0, 0, 0, 0, 0, 0, 0, 0, 0, 0, 0;
    0, 0, 0, 0, 0, 0, 0, 0.91, 0, 0, 0;
    0, 0, 0, 0, 0, 0, 0, 1.169, 1.175, 1.169, 0;
    0, 0, 0, 0, 0, 0, 0, 1.482, 1.512, 1.482, 0;
    0, 0, 0, 0, 0, 0, 0, 1.7, 1.734, 1.7, 0;
    0, 0, 0, 0, 0, 0, 0, 2.129, 2.173, 2.129, 0;
    0, 0, 0, 0, 0, 0, 0, 2.581, 2.635, 2.581, 0;
    0, 0, 0, 0, 0, 0, 0, 3.146, 3.210, 3.146, 0;
    0, 0, 0, 0, 0, 0, 0, 3.597, 3.672, 3.597, 0;
    0, 0, 0, 0, 0, 0, 0, 4.046, 4.134, 4.046, 0;
    0, 0, 0, 0, 0, 0, 0, 5.001, 5.108, 5.001, 0;
    0, 0, 0, 0, 0, 0, 0, 5.955, 6.084, 5.955, 0;
    0, 0, 0, 0, 0, 0, 0, 7.756, 7.921, 7.756, 0;
    0, 0, 0, 0, 0, 0, 0, 0, 9.874, 0, 0;
    0, 0, 0, 0, 0, 0, 0, 0, 11.711, 0, 0;
    0, 0, 0, 0, 0, 0, 0, 0, 12.860, 0, 0;
    0, 0, 0, 0, 0, 0, 0, 0, 13.785, 0, 0;
    0, 0, 0, 0, 0, 0, 0, 0, 14.696, 0, 0;
    0, 0, 0, 0, 0, 0, 0, 0, 16.533, 0, 17.061;
    0, 0, 0, 0, 0, 0, 0, 0, 18.370, 0, 18.956;
    0, 0, 0, 0, 0, 0, 0, 0, 22.043, 0, 22.748
]*in
UsingPipes := CountryPipes[:, Country]
# Actual inner diameter of a pipe
# Returns a value of inner diameter for a given pipe specification and a nominal pipe size.
innerdiameter(NominalPipeSize, PipeSpecification) :=
    WallThick ← MinWallThickness[index(NominalPipeSize, Pipesizes[:, 0]), PipeSpecification]
    ID ← Pipesizes[index(NominalPipeSize, Pipesizes[:, 0]), 1] - (2*WallThick) if WallThick ≠ 0
    ID ← 0 if WallThick == 0
    IDThick ← AvgInnerDiameter[index(NominalPipeSize, Pipesizes[:, 0]), PipeSpecification]
    return 0 if UsingPipes[index(NominalPipeSize, Pipesizes[:, 0])] == 0
    return IDThick if ((IDThick < ID) and (IDThick ≠ 0))
    return ID otherwise
NominalPipeSize(PipeSize) :=
    for i ∈ 0 .. length(Pipesizes[:, 0]) - 1
        NominalPipeSize ← Pipesizes[:, 0][i] if UsingPipes[i] ≠ 0
        break if PipeSize ≤ NominalPipeSize
# NominalPipeSize(PipeSize)
# Until the nominal pipe size is larger than the given pipe size the index is increased
# Once the criterion is met the for loop is broken and the nominal pipe size last found is returned
# If none are larger than the given the largest nominal pipe size is returned
# Example:NominalPipeSize(6.941 in)=8 in
IDindex(index, PipeSpecification) :=
    WallThick ← MinWallThickness[index, PipeSpecification] if UsingPipes[index] ≠ 0
    WallThick ← 0 otherwise
    ID ← Pipesizes[index, 1] - (2*WallThick) if WallThick ≠ 0
    ID ← 0 if WallThick == 0
    NominalSize ← Pipesizes[index, 0]
    IDThick ← [ID, NominalSize]
    ID ← AvgInnerDiameter[index, PipeSpecification] if (AvgInnerDiameter[index, PipeSpecification] < ID)
    return IDThick
# IDindex(index, PipeSpecification)
# This function is similar to innerdiameter(NominalPipeSize, PipeSpecification)
# except that it also returns the nominal pipe size. Thus it outputs a 1x2
# array of inner diameter and nominal pipe size. However instead of inputing
# the nominal pipe size you input the corresponding index number for the
# row of the Pipesizes matrix.
pipefittings := [
    1/8*in, 0 in, 0 in, 0 in, 0 in, 0 in, 0 in, 0 in, 0 in, 0 in, 0 in, 0 in, 0 in, 0 in;
    1/4*in, 0 in, 0 in, 0 in, 0 in, 0 in, 0 in, 1.325 in, 0 in, 0 in, 0 in, 0 in, 0 in, 0 in;
    3/8*in, 0 in, 0 in, 0 in, 7/8*in, 1 in, 0 in, 1.5938 in, 0 in, 0 in, 0 in, 0 in, 0 in, 0 in;
    1/2*in, 1.5*1/2*in, 1 in, 0.2*1/2*in, (1 + 3/32)*in, (1 + 1/32)*in, (1 + 23/32)*in, 1.8438 in, 0 in, 0 in, 0 in, .25 in, (1 + 7/16)*in, (1 + 3/16)*in;
    3/4*in, (1 + 1/8)*in, (1 + 1/8)*in, 0.2*3/4*in, (1 + 5/16)*in, (1 + 5/16)*in, (1 + 5/8)*in, 2.0938 in, 2.375 in, 1.217 in, 1.05 in, 5/16*in, (1 + 11/16)*in, (1 + 3/8)*in;
    1 in, 1.5 in, 1.5 in, 27 mm, (1 + 9/16)*in, (1 + 9/16)*in, (2 + 3/16)*in, 2.3438 in, 2.375 in, 1.482 in, 1.315 in, 9/32*in, (2 + 3/32)*in, (1 + 13/16)*in;
    1.25 in, 1.5*5/4*in, 0.718*5/4*in, 0.2*5/4*in, (1 + 31/32)*in, (1 + 3/4)*in, (2 + 17/32)*in, 2.5938 in, 3.5 in, 1.827 in, 1.66 in, 3/8*in, (2 + 5/8)*in, 2.25 in;
    1.5 in, 2.25 in, 2.25 in, 32 mm, (2 + 1/4)*in, (1 + 7/8)*in, (2 + 9/16)*in, 2.8438 in, 3.4375 in, 2.067 in, 1.9 in, .5 in, (2 + 17/16)*in, (2 + 19/32)*in;
    2 in, 3 in, 2.5 in, 46 mm, (2 + 22/32)*in, (2 + 1/32)*in, (2 + 11/16)*in, 3.65 in, 3.5 in, 2.542 in, 2.375 in, 19/32*in, (3 + 26/32)*in, (3 + 7/32)*in;
    2.5 in, 3.75 in, 3 in, 46 mm, (3 + 5/16)*in, (2 + 9/16)*in, (3 + 7/8)*in, 3.6875 in, 0 in, 0 in, 0 in, 1 in, 5.75 in, 5.25 in;
    3 in, 4.5 in, (3 + 3/8)*in, 46 mm, 4 in, (2 + 29/32)*in, (3 + 15/16)*in, 3.9375 in, 4 in, 3.75 in, 3.5 in, 7/8*in, (4 + 15/16)*in, (4 + 9/16)*in;
    3.5 in, 1.5*7/2*in, 0.718*3.5*in, 0.2*5/4*in, 1.04*7/2*in, 0.49*7/2*in, 0.7*3.5*in, 0.8*7/2*in, 0 in, 0 in, 0 in, 0 in, 0 in, 0 in;
    4 in, 6 in, (4 + 1/8)*in, 57 mm, (5 + 1/16)*in, (3 + 1/8)*in, (4 + 3/32)*in, 4.6875 in, 4 in, 4.75 in, 4.5 in, (1 + 7/32)*in, (6 + 7/32)*in, (5 + 23/32)*in;
    5 in, 195 mm, 127 mm, 57 mm, (6 + 5/32)*in, (4 + 1/2)*in, (5 + 3/16)*in, (6 + 9/32)*in, 4 in, 5.813 in, 5.563 in, (3 + 3/4)*in, 13.125 in, (9 + 3/8)*in;
    6 in, 9 in, (5 + 5/8)*in, 57 mm, (7 + 1/4)*in, 5 in, (5 + 27/32)*in, 6.25 in, 5.75 in, 6.875 in, 6.625 in, (1 + 5/16)*in, (9 + 6/16)*in, (8 + 21/32)*in;
    8 in, 12 in, 7 in, 64 mm, (9 + 5/16)*in, (6 + 3/8)*in, (7 + 1/8)*in, 8.25 in, 6 in, 8.875 in, 8.625 in, (1 + 15/16)*in, (13 + 9/32)*in, (11 + 11/32)*in;
    10 in, 15 in, 8.5 in, 70 mm, (11 + 13/16)*in, (5 + 1/4)*in, 0.7*10*in, 0.8*10 in, 5.875 in, 11 in, 10.75 in, 2.5*in, (16 + 15/32)*in, (16 + 7/8)*in;
    12 in, 18 in, 10 in, 76 mm, (13 + 7/8)*in, (6 + 3/4)*in, 0.7*12*in, 0.8*12 in, 6.3125 in, 13 in, 12.75 in, (2 + 11/16)*in, (18 + 29/32)*in, (16 + 1/8)*in;
    14 in, 21 in, 11 in, 89 mm, 15 in, (7 + 3/8)*in, 0.7*14*in, 0.8*14 in, 0 in, 0 in, 0 in, (7 + 3/16)*in, (28 + 6/16)*in, (21 + 3/16)*in;
    15 in, 1.5*15*in, 0.718*15*in, 0.2*15*in, 1.04*15*in, 0.49*15*in, 0.7*15*in, 0.8*15*in, 0 in, 0 in, 0 in, 0 in, 0 in, 0 in;
    16 in, 24 in, 12 in, 102 mm, 17 in, 9 in, 0.7*16*in, 0.8*16 in, 0 in, 0 in, 0 in, 8.75 in, 33.25 in, 24.75 in;
    18 in, 27 in, 13.5 in, 105 mm, (19 + 1/16)*in, 9 in, 0.7*18*in, 0.8*18 in, 9.875 in, 18.25 in, 18 in, (9 + 7/16)*in, (36 + 14/16)*in, (27 + 7/16)*in;
    20 in, 30 in, 15 in, 111 mm, (21 + 3/16)*in, (12 + 1/4)*in, 0.7*20*in, 0.8*20*in, 0 in, 0 in, 0 in, (11 + 7/16)*in, (41 + 12/16)*in, (30 + 5/16)*in;
    24 in, 36 in, 17 in, 127 mm, 1.04*24*in, 0.49*24*in, 0.7*24*in, 0.8*24*in, 0 in, 0 in, 0 in, 11 in, 46 in, 35 in
]
AvailND :=
    i ← 0
    j ← 0
    while i ≤ last(Pipesizes[:, 0]) and j ≤ last(Pipesizes[:, 0])
        if CountryPipes[:, Country][j] ≠ 0
            ND[i] ← Pipesizes[:, 0][j]
            i ← i + 1
        j ← j + 1
    ND
AvailPipeSizes(PipeSpecification) :=
    j ← 0
    for i ∈ 0, 1 .. length(Pipesizes[:, 0]) - 1
        if UsingPipes[i] ≠ 0
            InnerDiameter ← IDindex(i, PipeSpecification)
            if InnerDiameter[:, 0] ≠ [0]
                Sizes[j, 0] ← InnerDiameter[:, 0][0]
                Sizes[j, 1] ← InnerDiameter[:, 1][0]
                j ← j + 1
    return Sizes
# AvailPipeSizes(PipeSpecification)
# This function returns an array of available pipe sizes given a
# pipe specification. For every row in the Pipesizes matrix it calculates
# the inner diameter from IDindex which returns the inner diameter and
# the nominal pipe size. If the inner diameter is not equal to zero the pipe
# exists and the inner diameters are returned in the first column and
# the nominal pipe sizes are returned in the second.
NominalDiameter(ID_pipe, PipeSpecification) :=
    i ← 0
    while AvailPipeSizes(PipeSpecification)[:, 0][i] < ID_pipe
        i ← i + 1
        break if i == last(AvailPipeSizes(PipeSpecification)[:, 0])
    return AvailPipeSizes(PipeSpecification)[i, 1]  # Given minimum ID of a pipe it returns the nominal pipe size
ConRadius(NominalPipeSize) := 0.5*pipefittings[index(NominalPipeSize, Pipesizes[:, 0]), 4]
outerdiameter(NominalPipeSize) :=
    return Pipesizes[index(NominalPipeSize, Pipesizes[:, 0]), 1] if UsingPipes[index(NominalPipeSize, Pipesizes[:, 0])] ≠ 0
    return 0 otherwise  # Outerdiameter returns the average outer diameter of a pipe based on its nominal pipe size
# Outerradius finds the radius based on the Outerdiameter
outerradius(NominalPipeSize) := outerdiameter(NominalPipeSize)/2
CapDiameter(NominalPipeSize) := pipefittings[index(NominalPipeSize, Pipesizes[:, 0]), 4]
CapThickness(NominalPipeSize) := CapDiameter(NominalPipeSize)/2 - outerradius(NominalPipeSize)
ValveLength(ND) := 0.1399/0.1143*2*outerradius(ND)  # based on library butterfly valve dimensions
CouplingLength(NominalPipeSize) := pipefittings[index(NominalPipeSize, Pipesizes[:, 0]), 7]
CapHeight(NominalPipeSize) := pipefittings[index(NominalPipeSize, Pipesizes[:, 0]), 5]
SocketDepth(NominalPipeSize) := pipefittings[index(NominalPipeSize, Pipesizes[:, 0]), 3]
# Materials Database | Revision 6010, imported on February 28th, 2014
EN_MatApply := 1
E_Pvc := 0.12 mm
E_Concrete := 2 mm
T_ConcreteMin := 5 cm  # used throughout the code
EN_DrillSeries := 0
# Materials - Sedimentation Tank
L_SedPlateSheet := 300 cm
W_SedPlate := 42 in
W_SedBay := W_SedPlate
T_SedWallDivider := 15 cm
T_SedWeir := 4 cm
T_SedPlate := 0.2 cm
AN_SedPlate := 60 deg
N_SedModulePlatesMin := 8
L_SedPlateCantilevered := 20 cm
S_SedPlateMin := 2.5 cm  # This is to prevent floc roll up. We should specify this in a more fundamental way. (based on velocity gradients)
S_SedPlate := S_SedPlateMin
B_SedPlate := S_SedPlate + T_SedPlate
N_SedModulePlatesMax := floor(L_SedPlateCantilevered/B_SedPlate*tan(AN_SedPlate) + 1) = 13
PlateIndex :=
    for j ∈ N_SedModulePlatesMin .. N_SedModulePlatesMax
        for i ∈ 0 .. 50
            matrix[i, j - N_SedModulePlatesMin] ← j*(i + 1)
    array ← matrix[:, 0]
    for j ∈ N_SedModulePlatesMin + 1 .. N_SedModulePlatesMax
        array ← stack(array, matrix[:, j - N_SedModulePlatesMin])
    array ← sort(array)
    i ← 0
    while i < (last(array) - 1)
        array ← stack(submatrix(array, 0, i, 0, 0), submatrix(array, i + 2, last(array), 0, 0)) if array[i] == array[i + 1]
        array ← submatrix(array, 0, i + 1, 0, 0) if (i + 1 == i + 2 and i + 2 == last(array))
        i ← i + 1
    return array
# Maximum length of sed plate sticking out past module pipes without any additional support. The goal is to prevent floppy modules that don't maintain constant distances between the plates
ND_SedDiffuser := 1 in
ND_SedJetReverser := 3 in
# Materials - Plant
T_PlantWall := 15 cm
T_ChannelWall := 15 cm
# Drill Series
D_DrillEng :=
    i ← 0
    D_DrillEng[0] ← 1/32*in
    while D_DrillEng[i] ≤ 3/16*in - 1/128*in
        i ← i + 1
        D_DrillEng[i] ← D_DrillEng[i - 1] + 1/128*in
    while D_DrillEng[i] < 1 in - 1/16*in
        i ← i + 1
        D_DrillEng[i] ← D_DrillEng[i - 1] + 1/16*in
    while D_DrillEng[i] < 2 in
        i ← i + 1
        D_DrillEng[i] ← D_DrillEng[i - 1] + 1/4*in
    return D_DrillEng
D_DrillMet :=
    i ← 0
    D_DrillMet[0] ← 0.5 mm
    while D_DrillMet[i] ≤ 5 mm - 0.1 mm
        i ← i + 1
        D_DrillMet[i] ← D_DrillMet[i - 1] + 0.1 mm
    while D_DrillMet[i] < 20 mm
        i ← i + 1
        D_DrillMet[i] ← D_DrillMet[i - 1] + 1 mm
    while D_DrillMet[i] < 50 mm
        i ← i + 1
        D_DrillMet[i] ← D_DrillMet[i - 1] + 2 mm
    return D_DrillMet
D_Drill :=
    D_Drill ← D_DrillEng if EN_DrillSeries == 0
    D_Drill ← D_DrillMet otherwise
# Fluid Functions | Revision 6010, imported on February 28th, 2014
## Reynolds Number
Re_pipetransition := 2100  # transition between laminar and turbulent flow
R_h(w, b, open) :=
    w*b/(w + 2*b) if open == 1
    w*b/(2*(w + b)) otherwise  # hydraulic radius
# Note: if open=1, the channel is open.
# Otherwise, the channel is assumed to have 4 wetted sides
R_hGen(A, WP) := A/WP  # area/(wetted perimeter)
Re_Pipe(Q, D, ν) := 4*Q/(π*D*ν)  # originally: Re == ρVl/μ , where l is a "characteristic length" (in this case l = D)
Re_rect(Q, w, b, ν, open) := 4*Q*R_h(w, b, open)/(w*b*ν)  # Reynolds number for rectangular channel; open = 0 if all sides are wetted; l = D and D = 4*R.h
# Reynolds number for general cross-section
Re_Gen(V, A, WP, ν) := 4*R_hGen(A, WP)*V/ν
## Friction Coefficient
f(Q, D, ν, ε) :=
    f ← 0.25/log(ε/(3.7*D) + 5.74/Re_Pipe(Q, D, ν)^0.9)^2 if Re_Pipe(Q, D, ν) > Re_pipetransition
    f ← 64/Re_Pipe(Q, D, ν) otherwise
    return f  # Swamee-Jain friction factor for turbulent flow; best for Re>3000 and ε/D < 0.02
# in general for laminar flow in pipe
f_rect(Q, w, b, ν, ε, open) :=
    f ← 0.25/log(ε/(3.7*4*R_h(w, b, open)) + 5.74/Re_rect(Q, w, b, ν, open)^0.9)^2 if Re_rect(Q, w, b, ν, open) > Re_pipetransition
    f ← 64/Re_rect(Q, w, b, ν, open) otherwise
    return f
# Swamee-Jain friction factor adapted for rectangular channel.
# D = 4R.h in this case.
# in general for laminar flow in rectangular channel
f_Gen(A, WP, V, ν, ε) :=
    f ← 0.25/log(ε/(3.7*4*R_hGen(A, WP)) + 5.74/Re_Gen(V, A, WP, ν)^0.9)^2 if Re_Gen(V, A, WP, ν) > Re_pipetransition
    f ← 64/Re_Gen(V, A, WP, ν) otherwise
    return f
# Swamee-Jain friction factor adapted for any cross-section.
# D = 4R.h
# in general for laminar flow for any cross-section
## Head Loss Calculations
# In a Pipe | In a Rectangular Channel | In the General Case
# major losses (caused by shear)
h_f(Q, D, L, ν, ε) := f(Q, D, ν, ε)*8/(g*π^2)*L*Q^2/D^5
h_frect(Q, w, b, L, ν, ε, open) := f_rect(Q, w, b, ν, ε, open)*L/(4*R_h(w, b, open))*Q^2/(2*g*(w*b)^2)
h_fGen(A, WP, V, L, ν, ε) := f_Gen(A, WP, V, ν, ε)*L/(4*R_hGen(A, WP))*V^2/(2*g)
# From Darcy-Weisbach h_f == f*L/D*V^2/(2*g)
# minor losses (caused by flow expansions)
h_e(Q, D, K) := K*8/(g*π^2)*Q^2/D^4
h_erect(Q, w, b, K) := K*Q^2/(2*g*(w*b)^2)
h_eGen(V, K) := K*V^2/(2*g)
# This is total head loss due to major and minor losses
h_l(Q, D, L, K, ν, ε) := h_e(Q, D, K) + h_f(Q, D, L, ν, ε)
h_lrect(Q, w, b, L, K, ν, ε, open) := h_erect(Q, w, b, K) + h_frect(Q, w, b, L, ν, ε, open)
h_lGen(V, WP, L, K, ν, ε) := h_eGen(V, K) + h_fGen(A, WP, V, L, ν, ε)
# ________________________________________________________________________________________________________
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# Pressure Coefficient:
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C_p(Q, D, L, K, ν, ε) := f(Q, D, ν, ε)*L/D + K
# This is total head loss through the manifold
HL_Manifold(Q, D, L, K, ν, ε, n) := h_l(Q, D, L, K, ν, ε)*(1/3 + 1/(2*n) + 1/(6*n^2))
h_frectreal(Q, w, L, ν, ε, open) :=
    h_temp ← 1 m
    h_tempprev ← h_frect(Q, w, h_temp, L, ν, ε, open)
    error ← 1
    while error > 0.01
        h_temp ← h_tempprev
        h_tempprev ← (f_rect(Q, w, h_temp, ν, ε, open)*L*Q^2*(2 + w/h_temp)/(8*g*(w/h_temp)^3))^(1/6)
        error ← 0 if h_tempprev == 0 m
        error ← |h_temp - h_tempprev|/mean(h_temp, h_tempprev) otherwise
    return h_tempprev
## Orifice Equations
A_circle(D_circle) := π*D_circle^2/4
D_circle(A_circle) := sqrt(4*A_circle/π)
Q_orifice(D, h, Pi_VenaContractaOrifice) :=
    Q ← Pi_VenaContractaOrifice*A_circle(D)*sqrt(2*g*h) if h > 0 cm
    Q ← 0*L/s otherwise
    return Q  # modified to report zero flows if the orifice isn't submerged!
Q_orificeV(D, h, Pi_VenaContractaOrifice) :=
    Q ← Pi_VenaContractaOrifice*sqrt(2*g)*integral(D*sin(acos(z/(D/2)))*sqrt(h - z), z = -D/2 .. min(D/2, h)) if h > (-D/2 + 10^-13*m)
    Q ← 0*L/s otherwise
    return Q
# equation 4-31 from the following website:
# http://il.water.usgs.gov/proj/feq/fequtl98.i2h/4_7aupdate.html
# The 10^-13m is required to prevent the integration function from failure due to some Mathcad numerical error. this adjustment is small enough to not cause an detectable error in the resulting flow rate.
h_orifice(D, Pi_VenaContractaOrifice, Q) := (Q/(Pi_VenaContractaOrifice*A_circle(D)))^2*1/(2*g)
A_orifice(h, Pi_VenaContractaOrifice, Q) := Q/(Pi_VenaContractaOrifice*sqrt(2*g*h))
n_orifices(Q_plant, Pi_VenaContractaOrifice, Δh_orifice, D_orifice) := ceil(A_orifice(Δh_orifice, Pi_VenaContractaOrifice, Q_plant)/A_circle(D_orifice))
d_orificemanifold(Q_manifoldratio, Q_tank, d_pipe, L_s, L_l, K_total, n_orifice, ν, ε, Pi_VenaContractaOrifice) := nthroot((1 - Q_manifoldratio)*d_pipe^4/(((K_total + f(Q_tank, d_pipe, ν, ε)*L_l/d_pipe)*Q_manifoldratio - K_total - f(Q_tank, d_pipe, ν, ε)*L_s/d_pipe)*Pi_VenaContractaOrifice^2*n_orifice^2), 4)
## Flow Equations
Q_transition(D, ν) := π*D*Re_pipetransition*ν/4
# Hagen-Poiseuille
Q_hagen(D, h_f, L, ν) := π*D^4/(128*ν)*g*h_f/L
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Q_SJ(D, h_f, L, ν, ε) := -π/sqrt(2)*D^(5/2)*sqrt(g*h_f/L)*log(ε/(3.7*D) + 2.51*ν*sqrt(L/(2*g*h_f*D^3)))
Q_pipemajor(D, h_f, L, ν, ε) :=
    Q_hagen(D, h_f, L, ν) if Q_hagen(D, h_f, L, ν) < Q_transition(D, ν)
    Q_SJ(D, h_f, L, ν, ε) otherwise  # This function calculates the flow through a pipe under either laminar or turbulent flow when there are only major losses
Q_pipeminor(D, h_e, K) := A_circle(D)*sqrt(2*g*h_e/K)
# This function uses iteration to calculate the flow through a pipe system. It works for laminar or turbulent flow.
Q_pipetotal(D, h_l, L, ν, ε, K) :=
    Q_tempprev ← Q_pipemajor(D, h_l, L, ν, ε) if K == 0
    otherwise
        Q_temp ← 0*m^3/s
        error ← 1
        Q_tempprev ← min(Q_pipemajor(D, h_l, L, ν, ε), Q_pipeminor(D, h_l, K))
        while error > 0.01
            Q_temp ← Q_tempprev
            h_fnew ← h_l*h_f(Q_temp, D, L, ν, ε)/(h_f(Q_temp, D, L, ν, ε) + h_e(Q_temp, D, K))
            Q_tempprev ← Q_pipemajor(D, h_fnew, L, ν, ε)
            error ← 0 if Q_tempprev == 0*m^3/s
            error ← |Q_temp - Q_tempprev|/mean(Q_temp, Q_tempprev) otherwise
    return Q_tempprev
# get a better estimate of the major losses. Adjust it by the ratio of the actual head loss to the calculated total head loss
## Pipe Diameter Equations
# D.Hagen is only valid for laminar flow
D_Hagen(Q, h_f, L, ν) := (128*ν*Q*L/(g*h_f*π))^(1/4)
# D.Swamee is only valid for turbulent flow
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D_Swamee(Q, h_f, L, ν, ε) := 0.66*(ε^(5/4)*(L*Q^2/(g*h_f))^4.75 + ν*Q^9.4*(L/(g*h_f))^5.2)^0.04
# Only including major losses but valid for laminar or turbulent flow
D_PipeMajor(Q, h_f, L, ν, ε) :=
    D_Laminar ← D_Hagen(Q, h_f, L, ν)
    D_PipeMajor ← D_Laminar if Re_Pipe(Q, D_Laminar, ν) ≤ Re_pipetransition
    D_PipeMajor ← D_Swamee(Q, h_f, L, ν, ε) otherwise
    return D_PipeMajor
D_PipeMinor(Q, h_e, K) := (4*Q/π)^(1/2)*(K/(2*g*h_e))^(1/4)  # This is the same for laminar and turbulent flow
# This function uses iteration to calculate the pipe diameter required given a set of flow and pipe constraints. This is for sizing a pipe given both major and minor losses and is applicable for both laminar and turbulent flow.
D_PipeTotal(Q, h_l, L, ν, ε, K) :=
    D_Temp ← D_PipeMajor(Q, h_l, L, ν, ε) if K == 0
    otherwise
        D_Temp ← max(D_PipeMajor(Q, h_l, L, ν, ε), D_PipeMinor(Q, h_l, K))
        error ← 1
        while error > 0.001
            D_TempPrev ← D_Temp
            h_fnew ← h_l*h_f(Q, D_Temp, L, ν, ε)/(h_f(Q, D_Temp, L, ν, ε) + h_e(Q, D_Temp, K))
            D_Temp ← D_PipeMajor(Q, h_fnew, L, ν, ε)
            error ← |D_Temp - D_TempPrev|/mean(D_Temp, D_TempPrev)
    return D_Temp
# The functions below could easily be simplied using the function above to eliminate iteration.
# We should create one more function that returns a pipe diameter given a set of available pipes and then eliminate the functions below.
D_pipe(Q, D_available, h_l, L, ν, ε, K) :=
    i ← 0
    while Q > Q_pipetotal(D_available[i], h_l, L, ν, ε, K)
        i ← i + 1
    return D_available[i]
D_pipeschedule(Q, PipeSpecification, h_l, L, ν, ε, K) :=
    D_available ← AvailPipeSizes(PipeSpecification)[:, 0]
    i ← 0
    while Q > Q_pipetotal(D_available[i], h_l, L, ν, ε, K)
        i ← i + 1
    return AvailPipeSizes(PipeSpecification)[:, 1][i]
# Given pipe spec will return nominal pipe size!
D_nextlargest(D, D_available) :=
    i ← 0
    while D_available[i] < D
        i ← i + 1
        break if i == last(D_available)
    return D_available[i]
Dpipelarger(D, D_available) :=
    i ← 0
    while D_available[i] ≤ D
        i ← i + 1
        break if i == last(D_available)
    return D_available[i]
# This one rounds up even if the given pipe size is exactly correct to make it possible to go to a larger pipe if the given pipe isn't actually adequate. It is currently used in the pipe launder program
# This calculates an internal diameter of a pipe for a given pressure recovery constraint. This is useful to design manifolds where major losses are negligible.
ID_Manifold(Q_Manifold, PR_Max) := sqrt(Q_Manifold/(π/4*sqrt(2*g*PR_Max)))
# returns minimum manifold ID (doesn't account for available sizes)
D_Manifold(Q, h, L_manifold, Q_ratio, ν, ε, K, n) :=
    D_new ← 2 in
    D_old ← 0 in
    error ← 1
    while error > 0.01
        D_old ← D_new
        D_new ← (8*Q^2/(g*π^2*h)*(1 + (f(Q, D_old, ν, ε)*L_manifold/D_old + K)*(1/3 + 1/(2*n) + 1/(6*n^2)))/(1 - Q_ratio^2))^(1/4)
        error ← |D_old - D_new|/mean(D_old, D_new)
    return D_new
ND_Manifold(Q, h, L_manifold, Q_ratio, PipeSpecification, ν, ε, K, n) := NominalDiameter(D_Manifold(Q, h, L_manifold, Q_ratio, ν, ε, K, n), PipeSpecification)
# Given pipe spec will return nominal pipe size!
# This gives a good estimate for the area
# of the manifold.
A_Manifold(Q, h, L_manifold, Q_ratio, ν, ε, K, n) := D_Manifold(Q, h, L_manifold, Q_ratio, ν, ε, K, n)^2*π/4
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D_TankDrain(L_Tank, W_Tank, H_Tank, Ti_Drain, K) := sqrt(8*L_Tank*W_Tank/(π*Ti_Drain))*(K*H_Tank/(2*g))^(1/4)
ND_EqualParallelFlow(Q, Q_ratio, h_max, L_min, L_max, K_min, K_max, PipeSpecification, ν, ε) :=
    D_available ← AvailPipeSizes(PipeSpecification)[:, 0]
    D_new ← D_available[0]
    D_old ← 0 in
    error ← 1
    while error > 0.01
        D_old ← D_new
        ΔC_p ← K_max - K_min + f(Q, D_old, ν, ε)*(L_max - L_min)/D_old
        D_new ← (8/(g*π^2*h_max)*ΔC_p*Q_ratio^2/(1 - Q_ratio^2))^(1/4)*sqrt(2*Q/(1 + Q_ratio))
        error ← |D_old - D_new|/mean(D_old, D_new)
    return NominalDiameter(D_new, PipeSpecification)
# This function provides equal flow between parallel pipes
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D_orifices(HL_Launder, Q_Plant, D_Launder, N_Orifices, HW_SedTank, K_Orifice) := D_circle(A_orifice(HW_SedTank - HL_Launder - Q_Plant^2/(2*g*A_circle(D_Launder)^2), K_Orifice, Q_Plant/N_Orifices))
## Horizontal Channel Functions
# manifold is 0 for a channel that has constant flow. Manifold is 1 for a channel that has inflow along the length of the channel
W_HorizChannel(Q, H, ΔH, L_Channel, ν, ε, manifold) :=
    ΔH_Local ← min(ΔH, 1/3*H)
    W_new ← Q/((H - ΔH_Local)*sqrt(2*g*ΔH_Local))
    error ← 1
    i ← 0
    while (error > .001) and (i < 20)
        W ← W_new
        i ← i + 1
        W_new ← sqrt((1 + f_rect(Q, W, H - ΔH_Local, ν, ε, 1)*L_Channel/(4*R_h(W, H - ΔH_Local, 1))*(1 - 2*manifold/3))/(2*g*ΔH_Local))*Q/(H - ΔH_Local)
        error ← |W_new - W|/(W_new + W)
    return W_new
# The head loss in the channel is 1/3 the head loss that is calculated in a rectangular channel for the case of manifold flow because channel is receiving flow all along the channel. Thus the (1 - 2*manifold/3) factor is from manifold analysis.
#
# The width is based on conservation of energy assuming that the velocity at the upstream end of the channel is zero.
# Note that it isn't possible for ΔH to be larger than 1/3H because that would require supercritical flow in the channel and that isn't possible because the bottom slope of this channel is horizontal.
#
# Thus you can obtain the minimum possible width by entering a large ΔH
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W_HorizChannelMin(Q, H, L_Channel, ν, ε, manifold) := W_HorizChannel(Q, H, H/3, L_Channel, ν, ε, manifold)
# This function finds the minimum channel width. To create a safety factor I'd suggest using an H that is slightly reduced from the actual available H. For example, for a 20 cm deep channel, consider using 18 cm.
H_HorizChannel(Q, W_Channel, ΔH, L_Channel, ν, ε, manifold) :=
    H_new ← Q/(W_Channel*sqrt(2*g*ΔH)) + ΔH
    error ← 1
    i ← 0
    while (error > .001) and (i < 200)
        H ← H_new
        ΔH_Local ← min(ΔH, 1/3*H)
        i ← i + 1
        H_new ← Q/W_Channel*sqrt((1 + f_rect(Q, W_Channel, H - ΔH_Local, ν, ε, 1)*L_Channel/(4*R_h(W_Channel, H - ΔH_Local, 1))*(1 - 2*manifold/3))/(2*g*ΔH_Local)) + ΔH_Local
        error ← |H_new - H|/(H_new + H)
    return H_new
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H_HorizChannelMin(Q, W_Channel, L_Channel, ν, ε, manifold) :=
    H_new ← Q/(W_Channel*sqrt(2*g*5*m)) + 5 m
    error ← 1
    i ← 0
    while (error > .001) and (i < 200)
        H ← H_new
        ΔH_Local ← H/3
        i ← i + 1
        H_new ← Q/W_Channel*sqrt((1 + f_rect(Q, W_Channel, H - ΔH_Local, ν, ε, 1)*L_Channel/(4*R_h(W_Channel, H - ΔH_Local, 1))*(1 - 2*manifold/3))/(2*g*ΔH_Local)) + ΔH_Local
        error ← |H_new - H|/(H_new + H)
    return H_new
# The function below calculates the depth of a channel given a ratio of channel H/W (Π.Channel) and change in depth in the channel from one end to the other.
H_HorizChannelΠ(Q, Π_Channel, ΔH, L_Channel, ν, ε, manifold) :=
    H_new ← sqrt(Q/(Π_Channel*sqrt(2*g*ΔH)))
    W_new ← H_new/Π_Channel
    error ← 1
    i ← 0
    while (error > .001) and (i < 20)
        H ← H_new
        W_new ← H_new/Π_Channel
        ΔH_Local ← min(ΔH, 1/3*H)
        i ← i + 1
        H_new ← (ΔH_Local + sqrt(ΔH_Local^2 + 4*Q*Π_Channel*sqrt((1 + f_rect(Q, W_new, H - ΔH_Local, ν, ε, 1)*L_Channel/(4*R_h(W_new, H - ΔH_Local, 1))*(1 - 2*manifold/3))/(2*g*ΔH_Local))))/2
        error ← |H_new - H|/(H_new + H)
    return H_new
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W_HorizChannelΠ(Q, Π_Channel, ΔH, L_Channel, ν, ε, manifold) := H_HorizChannelΠ(Q, Π_Channel, ΔH, L_Channel, ν, ε, manifold)/Π_Channel
# This directly calculates the Width of a channel given a desired aspect ratio.
H_HorizChannelΠMin(Q, Π_Channel, L_Channel, ν, ε, manifold) :=
    ΔH_Large ← 5 m
    H_new ← sqrt(Q/(Π_Channel*sqrt(2*g*ΔH_Large)))
    W_new ← H_new/Π_Channel
    error ← 1
    i ← 0
    while (error > .001) and (i < 20)
        H ← H_new
        W_new ← H_new/Π_Channel
        ΔH_Local ← H/3
        i ← i + 1
        H_new ← (ΔH_Local + sqrt(ΔH_Local^2 + 4*Q*Π_Channel*sqrt((1 + f_rect(Q, W_new, H - ΔH_Local, ν, ε, 1)*L_Channel/(4*R_h(W_new, H - ΔH_Local, 1))*(1 - 2*manifold/3))/(2*g*ΔH_Local))))/2
        error ← |H_new - H|/(H_new + H)
    return H_new
W_HorizChannelΠMin(Q, Π_Channel, L_Channel, ν, ε, manifold) := H_HorizChannelΠMin(Q, Π_Channel, L_Channel, ν, ε, manifold)/Π_Channel
## Weir Head Loss
# H (or head loss in the equation below) is the difference in height between the water upstream of the weir and the top of the weir.
W_rectweir(Q, H) := 3/2*Q/(Pi_VenaContractaOrifice*sqrt(2*g)*H^(3/2))
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Headloss_weir(Q, W) := (3/2*Q/(Pi_VenaContractaOrifice*sqrt(2*g)*W))^(2/3)
Q_RectWeir(H, W) := 2/3*Pi_VenaContractaOrifice*sqrt(2*g)*H^(3/2)*W
## Energy Dissipation Control Equations
# These equations are to control floc break up.
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D_PipeED(ED, Q, Pi_VenaContractaOrifice, Pi_Jet) := (Pi_Jet*4*Q/(π*ED^(1/3)))^(3/7)*1/sqrt(Pi_VenaContractaOrifice)
ND_PipeED(ED, Q, Pi_VenaContractaOrifice, Pi_Jet, PipeSpecification) := NominalDiameter(D_PipeED(ED, Q, Pi_VenaContractaOrifice, Pi_Jet), PipeSpecification)
Q_PipeED(ED, D, Pi_VenaContractaOrifice, Pi_Jet) := π*D^(7/3)*ED^(1/3)*Pi_VenaContractaOrifice^(7/6)/(4*Pi_Jet)
# This function is the same as the one below called Q.PipeMaxED.
# Maximum flow through manifold pipe
Q_PipeMaxED(ED, A, Pi_VenaContractaOrifice, Pi_Jet) :=
    for i ∈ 0 .. last(A)
        Q[i] ← A[i]*Pi_VenaContractaOrifice/Pi_Jet*(2*ED*sqrt(A[i]*Pi_VenaContractaOrifice)/π)^(1/3)
    return Q  # This function creates an array of flow rates given an array of areas for pipes.
# This function should be eliminated. No reason to have a for loop here.
V_PipeMaxED(ED, A, Pi_VenaContractaOrifice, Pi_Jet) :=
    for i ∈ 0 .. last(A)
        V[i] ← Pi_VenaContractaOrifice/Pi_Jet*(2*ED*sqrt(A[i]*Pi_VenaContractaOrifice)/π)^(1/3)
    return V
findindexQ(Q, Q_array) :=
    i ← 0
    while Q_array[i] < Q
        i ← i + 1
    return i
# This function gives us an index in an array of the pipe size that insures a flow rate greater than  flow rate Q
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ED_Port(Q_Port, D_Port, Pi_VenaContractaOrifice, Pi_Jet) := (Q_Port/(D_Port^(7/3)*Pi_VenaContractaOrifice^(7/6))*4*Pi_Jet/π)^3
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# This function gives us the energy dissipation rate in the inlet channel following the expansion through the entrance port.
ED_Channel(V_Channel, H_Channel, Pi_VenaContractaOrifice, Pi_Jet) := (Pi_Jet*V_Channel/Pi_VenaContractaOrifice)^3/(H_Channel*Pi_VenaContractaOrifice)
V_Channel(ED_Channel, H_Channel, Pi_VenaContractaOrifice, Pi_Jet) := Pi_VenaContractaOrifice/Pi_Jet*(ED_Channel*Pi_VenaContractaOrifice*H_Channel)^(1/3)
# This function gives us the average velocity in the inlet channel before any water has exited through an inlet manifold pipe.
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# This function gives us the area of the inlet channel given the flow rate and the energy dissipation rate.
A_Channel(Q_Plant, ED_Channel, Pi_VenaContractaOrifice, Pi_Jet) := (Pi_Jet*Q_Plant/(Pi_VenaContractaOrifice^(4/3)*ED_Channel^(1/3)))^(6/7)
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H_Channel(Q_Plant, W_Channel, ED_Channel, Pi_VenaContractaOrifice, Pi_Jet) := (Pi_Jet*Q_Plant/W_Channel)^(3/4)/(Pi_VenaContractaOrifice*ED_Channel^(1/4))
# This function gives us the height of the inlet channel once the width is known.
W_Channel(Q_Plant, H_Channel, ED_Channel, Pi_VenaContractaOrifice, Pi_Jet) := Pi_Jet*Q_Plant/(H_Channel*Pi_VenaContractaOrifice*ED_Channel^(1/4))^(4/3)
## Manifold Equation
Q_ports(A_Manifold, A_Port, N_Ports, Q_Manifold, L_Manifold, B_Port, Pi_vc, ν, ε_Roughness) :=
    Q_Port ← Q_Manifold/N_Ports
    D_Manifold ← D_circle(A_Manifold)
    V[0] ← Q_Manifold/A_Manifold
    Q_m[0] ← Q_Manifold
    H_m[0] ← 1/(2*g)*(Q_Manifold/(N_Ports*Pi_vc*A_Port))^2
    maxerror ← 0.00001
    error ← 1
    while error > maxerror
        for i ∈ 0 .. N_Ports - 1
            Q_p[i] ← Pi_vc*A_Port*sqrt(2*g*H_m[i])
            V[i + 1] ← max(V[i] - Q_p[i]/A_Manifold, 0.0000001*m/s)
            Q_m[i + 1] ← A_Manifold*V[i + 1]
            ΔH_Exp ← (V[i] - V[i + 1])*V[i + 1]/g
            H_m[i + 1] ← max(H_m[i] + ΔH_Exp - h_f(Q_m[i + 1], D_Manifold, B_Port, ν, ε_Roughness), 0.0000001 mm)
        error ← ((Q_Manifold/sum(Q_p))^2 - 1)^2
        H_m[0] ← H_m[0]*(1 + 0.001*((Q_Manifold - sum(Q_p))/Q_Manifold))
    return Q_p
## Sizing a pipe to be used as a channel
# This is the requirement that there must be sufficient head available to accelerate the flow to the critical velocity
Q_Max(D, θ) := ((D/2)^2*(θ - sin(θ)*cos(θ)))*sqrt(D/2*(1 + cos(θ))*2*g)
# Set the two equations for Q equal and simplify. The result is
f(θ) := (θ - sin(θ)*cos(θ))/(4*sin(θ)*(1 + cos(θ))) - 1
# Use the root find function to get the value of θ. Note that θ is independent of the pipe diameter.
θguess := 3 rad
θ := root(f(θguess), θguess) = 1.95761  # This is the angle in radians corresponding to the maximum critical depth
# Now solve the max flow equation for the Diameter given θ.
D_PipeChannel(Q, EN_PipeSpec) :=
    D ← 2*(Q/((θ - sin(θ)*cos(θ))*sqrt((1 + cos(θ))*2*g)))^(2/5)
    D ← NominalDiameter(D, EN_PipeSpec)
    return D
# This was added to find the pipe size needed for the low flow plant drain pipe
D_PipeOpenFlow(Q, h_e, L, n, EN_PipeSpec) :=
    D ← (n*Q/(h_e/L)^(1/2)*2^(13/3)/π)^(3/8)*(s^(3/8)/m^(1/8))
    D ← NominalDiameter(D, EN_PipeSpec)
    return D
# Carman Kozeny Sand Bed Head Loss
h_lKozeny(L, D, V, ε, ν) := k_Kozeny*L*ν/g*(1 - ε)^2/ε^3*36/D^2*V
# Rectangular Duct Functions
# Derivation:
R_h == w*h/(2*(w + h))
D_h == 4*R_h
W_SquareDuct(Q, h_f, L, ν, ε) :=
    width ← (32*ν*L*Q/(g*h_f))^(1/4)
    while h_frect(Q, width, width, L, ν, ε, 0) > h_f
        width ← width + 1 cm
    return width
h_f == f*L/(4*R_h)*V^2/(2*g)
f == 64/(V*D_h/ν)  # This assumes laminar flow; however, most flows within ducts will end up being turbulent. The actual function safeguards against this.
h_f == 64/(V*4*R_h/ν)*L/(4*R_h)*V^2/(2*g)
R_h^2 == 2*L*Q/A*ν/(g*h_f)
(w*h/(2*(w + h)))^2 == 2*L*Q/(w*h)*ν/(g*h_f)
(w*h)^3/(4*(w + h)^2) == 2*L*Q*ν/(g*h_f)
# if duct is square...
w^6/(4*4*w^2) == 2*L*Q*ν/(g*h_f)
w == (32*L*Q*ν/(g*h_f))^(1/4)
# Head Loss Calculations Component Wise
# Sedimentation Tank
Q_SedManifoldMax := Q_PipeED(ED_SedInlet, innerdiameter(ND_SedManifoldMax, PS_Default), Pi_VenaContractaOrifice, Pi_JetRound)
Q_SedManifoldMin := Q_PipeED(ED_SedInlet, innerdiameter(ND_SedManifoldMin, PS_Default), Pi_VenaContractaOrifice, Pi_JetRound)
N_SedTanks := max(min(ceil(Q_Plant/Q_SedManifoldMin), N_SedTanksMin), ceil(Q_Plant/(2*Q_SedManifoldMax))) = 6
Q_Sed := Q_Plant/N_SedTanks = 0.0166667 m^3/s
L_SedUpflowMax := Q_SedManifoldMax/(V_SedUpBod*W_SedBay) = 7.91255 m
N_SedBaysTotal := ceil(Q_Plant/(V_SedUpBod*W_SedBay*L_SedUpflowMax)) = 12
# There is a minimum number of total sed bays required to maintain the desired upflow velocity in each sed tank given the maximum length calculated above.
# Minimum number of sed bays per sed tank given the minimum total number calculated above.
N_SedBaysMin := ceil(N_SedBaysTotal/N_SedTanks) = 2
fN_SedBays(Q_Plant) := min(ceil(Q_Plant/(N_SedTanksMin*Q_SedManifoldMax)), 2)
N_SedBaysEst := fN_SedBays(Q_Plant) = 2
N_SedBays := max(N_SedBaysMin, N_SedBaysEst) = 2
# The number of bays per tank is the maximum of the calculated value and the user input
Q_SedBay := Q_Sed/N_SedBays = 0.00833333 m^3/s
L_SedUpflowEst := Q_SedBay/(W_SedBay*V_SedUpBod) = 7.81152 m
W_Sed := N_SedBays*W_SedBay = 2.1336 m
ND_SedLaunder := ND_Manifold(Q_SedBay, HL_SedLaunderBod, L_SedUpflowEst, Pi_QLaunderOrifices, PS_Default, Nu_Water, E_Pvc, K_PipeExit, 2*floor(L_SedUpflowEst/B_SedLaunderOrificesEst)) = 0.2032 m
ND_SedManifold := NominalDiameter(D_PipeED(ED_SedInlet, Q_SedBay, Pi_VenaContractaOrifice, Pi_JetRound), PS_Default) = 0.2032 m
D_PipeED(ED_SedInlet, Q_SedBay, Pi_VenaContractaOrifice, Pi_JetRound) = 0.200088 m
# Inlet Channel
L_SedChannel := N_SedTanks*W_Sed + (N_SedTanks - 1)*T_SedWallDivider + T_PlantWall - T_SedWallDivider = 13.5516 m
# Length of the inlet channel, which runs along the entire width of the sed tanks.
W_SedInletChannelPlumbing := 2*ConRadius(ND_SedManifold) + 2*S_Fitting = 0.336537 m
A_SedInletChannelED := A_Channel(Q_Plant, ED_SedInlet, Pi_VenaContractaOrifice, Pi_JetRound) = 0.292549 m^2
HL_SedWeirExit := Headloss_weir(Q_Plant, L_SedChannel) = 2.50605 cm
HW_SedInletChannelPlumbing := HL_SedLaunderBod + 2*ConRadius(ND_SedLaunder) + S_Fitting + HL_SedWeirExit = 0.351598 m
W_SedInletChannelPreWeir :=
    W ← W_SedInletChannelPlumbing
    HW ← HW_SedInletChannelPlumbing
    while W*HW < A_SedInletChannelED
        HW ← HW + 1 mm if HW < W
        W ← W + 1 mm otherwise
    return W
    = 0.541538 m
EN_InletChannelGeom :=
    hl_weir ← Headloss_weir(Q_Plant, W_SedInletChannelPreWeir)
    Geom_Channel ← Perpendicular_Weir if (hl_weir ≤ HL_SedWeirMax)
    Geom_Channel ← Parallel_Weir otherwise
    return Geom_Channel
    = 1
# This function determines the geometry of the weir based on the headloss through it. Hl.SedWeirMax is an expert input. 0-->Perpendicular, 1--> Parallel
W_SedWeirInlet :=
    W_SedInletChannelPreWeir if EN_InletChannelGeom == Perpendicular_Weir
    L_SedChannel otherwise
    = 13.5516 m
HL_SedWeirInlet := Headloss_weir(Q_Plant, W_SedWeirInlet) = 0.0250605 m
HW_SedInletChannel :=
    W ← W_SedInletChannelPlumbing
    HW ← HW_SedInletChannelPlumbing
    while W*HW < A_SedInletChannelED
        HW ← HW + 1 mm if HW < W
        W ← W + 1 mm otherwise
    return HW
    = 0.540598 m
H_SedInletChannel := HW_SedInletChannel + H_PlantFreeboard = 0.640598 m
H_SedWeirInlet := HW_SedInletChannel - HL_SedWeirInlet = 0.515538 m
W_SedInletChannelPostWeir := max(W_ChannelMin, W_HorizChannel(Q_Plant, H_SedWeirInlet, HL_ChannelMax, L_SedChannel, Nu_Water, E_Concrete, 1)) = 0.252125 m
W_SedInletChannel :=
    W_SedInletChannelPreWeir if EN_InletChannelGeom == Perpendicular_Weir
    W_SedInletChannelPreWeir + T_SedWeir + W_SedInletChannelPostWeir if EN_InletChannelGeom == Parallel_Weir
    = 0.833662 m
# This is the velocity in the part of the channel that delivers the flocs
V_SedInletChannel := Q_Plant/(W_SedInletChannelPreWeir*HW_SedInletChannel) = 0.341584 m/s
K_SedInletChannel := 1
HL_SedInletChannel := h_eGen(V_SedInletChannel, K_SedInletChannel) = 0.00594899 m
# Outlet Pipe to Filters
L_FiEntrancePipeEst := W_DCWalkway + W_SedInletChannel + 1 m = 2.83366 m
# The extra 1 meter is for the vertical section where the pipe drops down from the sed tank exit channel.
ND_FiEntrancePipeMax := FloorNearest(Pipesizes[index(FloorNearest(W_SedBay/2 - ConRadius(ND_SedManifold) - 2*S_Fitting, Pipesizes[:, 1]), Pipesizes[:, 1]), 0], AvailND) = 8 in
# Previously the size of the filter entrance pipe was calculated based solely on Q.Plant and would not calculate for higher flow rates; now the min function with the Q.PipeTotal calculation avoid that failure.
ND_FiEntrancePipe := min(D_pipeschedule(min(Q_Plant, Q_pipetotal(innerdiameter(AvailND[last(AvailND)], PS_Default), HL_FiEntrancePipeMax, L_FiEntrancePipeEst, Nu_Water, E_Pvc, K_FiEntrancePipe)), PS_Default, HL_FiEntrancePipeMax, L_FiEntrancePipeEst, Nu_Water, E_Pvc, K_FiEntrancePipe), ND_FiEntrancePipeMax) = 8 in
N_FiEntrancePipes := ceil(Q_Plant/Q_pipetotal(innerdiameter(ND_FiEntrancePipe, PS_Default), HL_FiEntrancePipeMax, L_FiEntrancePipeEst, Nu_Water, E_Pvc, K_FiEntrancePipe)) = 4
Q_FiEntrancePipe := Q_Plant/N_FiEntrancePipes = 25 L/s
HL_FiEntrancePipe := h_l(Q_FiEntrancePipe, innerdiameter(ND_FiEntrancePipe, PS_Default), L_FiEntrancePipeEst, K_FiEntrancePipe, Nu_Water, E_Pvc) = 8.44716 cm
# Exit Channel
HW_SedExitChannel := HW_SedInletChannel - HL_SedLaunderBod = 0.500598 m
H_SedWeirExit := HW_SedExitChannel - HL_SedWeirExit = 0.475538 m
# Sludge Drain
H_LamellaToLaunder := T_ConcreteMin + CapThickness(ND_SedLaunder) = 0.0587312 m
L_SedUpflow :=
    i ← 0
    L ← 0 m
    while L < L_SedUpflowEst
        i ← i + 1
        L ← (H_SedWeirExit + T_ChannelWall - outerdiameter(ND_SedLaunder) - H_LamellaToLaunder - T_SedPlate*cos(AN_SedPlate))/tan(AN_SedPlate) + T_SedPlate/sin(AN_SedPlate) + (PlateIndex[i] - 1)*B_SedPlate/sin(AN_SedPlate) - 2*T_ConcreteMin
    return L
    = 7.86555 m
L_SedChannelToWall := L_SedUpflow + 2*T_ConcreteMin = 7.96555 m
N_SedPlates := round((L_SedChannelToWall - (H_SedWeirExit + T_ChannelWall - outerdiameter(ND_SedLaunder) - H_LamellaToLaunder - T_SedPlate*cos(AN_SedPlate))/tan(AN_SedPlate) - T_SedPlate/sin(AN_SedPlate))/(B_SedPlate/sin(AN_SedPlate)) + 1) = 250
V_SedUp := Q_SedBay/(L_SedUpflow*W_SedBay) = 0.000993132 m/s
# The factor of two is because the flow rate decreases linearly as the tank drain (for a constant cross section tank). Thus the average drain rate is 1/2 the initial drain rate.
Q_SedSludgeDrain := (2*W_SedBay*L_SedUpflow*HW_SedEst/Ti_SludgeDrain) = 0.0186466 m^3/s
N_SedSludgeOrificesEst := floor(L_SedUpflow/B_SedSludgeOrificesEst) - 1 = 77
# This is the required diameter of the sludge drain if it were circular
# To get the effective "diameter" of the sludge drain manifold (the cross section will actually be a polygon) an approximate length for the portion of the sludge drain which runs under the floc hopper is assumed to be 1m and is entered in the manifold function as if its section had inlet holes as well. Since the effect of the additional length on the calculated "diameter" is very small, the accuracy of these assumptions is not very important.
D_SedSludgeChannel := D_Manifold(Q_SedSludgeDrain, HW_SedEst/3, L_SedUpflow, Pi_QSludgeOrifices, Nu_Water, E_Concrete, 0, N_SedSludgeOrificesEst) = 0.131042 m
ND_SedSludgePipe := NominalDiameter(D_PipeTotal(Q_SedSludgeDrain, HW_SedEst/3, L_SedUpflow + L_FlocHopperEst, Nu_Water, E_Pvc, K_PipeExit + K_GateValve), PS_Default) = 0.1524 m
HL_SedSludgeEst := (HL_Manifold(Q_SedSludgeDrain, D_SedSludgeChannel, L_SedUpflow + L_FlocHopperEst, 0, Nu_Water, E_Concrete, N_SedSludgeOrificesEst) + h_l(Q_SedSludgeDrain, innerdiameter(ND_SedSludgePipe, PS_Default), L_FlocHopperEst + ValveLength(ND_SedSludgePipe) + 10 cm, K_GateValve + K_PipeExit, Nu_Water, E_Pvc)) = 0.178347 m
# old calculation of HL sedsludgeest
HL_Manifold(Q_SedSludgeDrain, D_SedSludgeChannel, L_SedUpflow + L_FlocHopperEst, 0, Nu_Water, E_Concrete, N_SedSludgeOrificesEst) = 0.0994408 m
HL_SedSludgeOrificeEst := HW_SedEst - HL_SedSludgeEst = 1.82165 m
# Inlet Manifold
V_InletManifold := ED_SedInlet*D_PipeED  # error: This value must be a scalar.
T_SedDiffuserWall := outerradius(ND_SedDiffuser) - innerdiameter(ND_SedDiffuser, PS_Default)/2 = 0.001778 m
L_SedDiffuserOutlet := 5 cm - 2*T_SedDiffuserWall = 0.046444 m  # based on the mold
B_SedManifoldPort := L_SedDiffuserOutlet + 2*T_SedDiffuserWall = 5 cm
# Subtracting two times the socket depth from the available length allows space for the manifold to be pulled out of its coupling without the diffusers running into the support ledge at the free end.
N_SedManifoldPorts := floor((L_SedUpflow - SocketDepth(ND_SedManifold) - CapThickness(ND_SedManifold))/(L_SedDiffuserOutlet + 2*T_SedDiffuserWall)) = 155
# Subtracting two times the socket depth from the available length allows space for the manifold to be pulled out of its coupling without the diffusers running into the support ledge at the free end.
Q_SedManifoldPort := Q_SedBay/N_SedManifoldPorts = 0.0537634 L/s
D_SedManifoldPort := CeilNearest(D_PipeED(ED_SedInlet, Q_SedManifoldPort, Pi_VenaContractaOrifice, Pi_JetRound), D_Drill) = 2.38125 cm
# We need enough length to give the jet that is coming out of the manifold port to expand to the size of the rectangular slot
# This is the amount of stretch we can get from the PVC pipe in the transition from round to rectangular. Large stretch factors are not possible to create without tearing the PVC.
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W_SedDiffuserOutlet := ((Pi_JetRound*W_Sed*V_SedUpBod/2)^3/ED_SedInlet)^(1/4) = 0.71339 cm
V_SedManifoldPort := Q_SedManifoldPort/(π*D_SedManifoldPort^2/4)*1/Pi_VenaContractaOrifice = 0.191623 m/s
V_SedDiffuser := Q_SedManifoldPort/(B_SedManifoldPort*W_SedDiffuserOutlet) = 0.150727 m/s
V_SedManifoldPort/V_SedDiffuser = 1.27132
K_Diffuser := 1
HL_SedDiffuser := h_eGen(V_SedDiffuser, K_Diffuser) = 0.00115832 m
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L_SedDiffuserRoundjetanalogy := 6.2*V_SedManifoldPort/V_SedDiffuser*D_SedManifoldPort*sqrt(Pi_VenaContractaOrifice) = 0.148978 m
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L_SedDiffuserPlanejetanalogy := (2.41*V_SedManifoldPort/V_SedDiffuser)^2*D_SedManifoldPort*sqrt(Pi_VenaContractaOrifice) = 0.177428 m  # plane jet
L_SedManifoldDiffuser := max(L_SedDiffuserPlanejetanalogy, L_SedDiffuserRoundjetanalogy)
# Exit Launder
B_SedLaunderOrifices := B_SedLaunderOrificesEst = 0.1 m
L_SedLaunder :=
    L_SedChannelToWall - CapThickness(ND_SedLaunder) if T_ChannelWall > 2*CouplingLength(ND_SedLaunder)
    L_SedChannelToWall + T_ChannelWall - 2*CouplingLength(ND_SedLaunder) - CapThickness(ND_SedLaunder) if CouplingLength(ND_SedLaunder) < T_ChannelWall < 2*CouplingLength(ND_SedLaunder)
    L_SedChannelToWall + T_ChannelWall - CouplingLength(ND_SedLaunder) - CapThickness(ND_SedLaunder) otherwise
    = 7.89727 m
N_SedLaunderOrifices := floor((L_SedLaunder - CapHeight(ND_SedLaunder) + CapThickness(ND_SedLaunder) - SocketDepth(ND_SedLaunder))/B_SedLaunderOrifices) = 76
# This the HL due to major & minor losses loses through the manifold.
HL_SedLaunderMajor := HL_Manifold(Q_SedBay, innerdiameter(ND_SedLaunder, PS_Default), L_SedLaunder, 0, Nu_Water, E_Pvc, N_SedLaunderOrifices) = 0.00106332 m
HL_SedLaunderOrificeEst := HL_SedLaunderBod - HL_SedLaunderMajor = 0.0389367 m
Q_SedLaunderOrifices := Q_SedBay/N_SedLaunderOrifices = 0.000109649 m^3/s
D_SedLaunderOrifice := RoundNearest(D_circle(A_orifice(HL_SedLaunderOrificeEst, Pi_VenaContractaOrifice, Q_SedLaunderOrifices)), D_Drill) = 1.5875 cm
# This is the total headloss through the launder based on the actual diameter of the orifices
HL_SedLaunderOrifice := h_orifice(D_SedLaunderOrifice, Pi_VenaContractaOrifice, Q_SedLaunderOrifices) = 3.94225 cm
W_SedExitChannelPreWeir := max(W_HorizChannel(Q_Plant, HW_SedExitChannel, HL_ChannelMax, L_SedChannel, Nu_Water, E_Concrete, 1), W_ChannelMin, CapHeight(ND_SedLaunder) + 1.05*L_SedLaunderCapExcess) = 0.259775 m
W_SedExitChannelPostWeir := max(2*ConRadius(ND_FiEntrancePipe)*(N_FiEntrancePipes > 1), W_ChannelMin, W_HorizChannel(Q_Plant, H_SedWeirInlet, HL_ChannelMax, L_SedChannel - W_SedBay/2, Nu_Water, E_Concrete, 1)) = 0.25098 m
W_SedExitChannel := W_SedExitChannelPreWeir + T_SedWeir + W_SedExitChannelPostWeir = 0.550755 m
# The cross sectional area of the drain if it were circular
A_SedSludge := π/4*D_SedSludgeChannel^2 = 0.0134869 m^2
W_SedSludge := sqrt(A_SedSludge) = 0.116133 m
H_SedSludge := (A_SedSludge/W_SedSludge) = 0.116133 m
W_SedSideSlopes := (W_SedBay - outerradius(ND_SedJetReverser))/2 = 0.511175 m
H_SedSideSlopes := tan(AN_SedSlope)*W_SedSideSlopes = 0.609195 m
Z_SedSideSlopes := Plant_Origin[2] + H_SedSludge + T_ConcreteMin + outerradius(ND_SedJetReverser) + H_SedSideSlopes = 0.819778 m
# Plates
L_SedPlateActive := (N_SedPlates - 1)*S_SedPlate/sin(AN_SedPlate) = 7.18801 m
L_SedPlateEst := (B_SedPlate*Q_SedBay/(W_SedBay*L_SedPlateActive*V_SedCBod) - S_SedPlate)/(sin(AN_SedPlate)*cos(AN_SedPlate)) = 0.506953 m
N_PlatesPerSheet := floor(L_SedPlateSheet/L_SedPlateEst) = 5
L_SedPlate := L_SedPlateSheet/N_PlatesPerSheet = 0.6 m
V_SedActiveUp := Q_SedBay/(W_SedBay*L_SedPlateActive) = 1.08674 mm/s
V_SedCaptureCheck := V_SedActiveUp*B_SedPlate/(L_SedPlateEst*sin(AN_SedPlate)*cos(AN_SedPlate) + S_SedPlate) = 0.12 mm/s
HL_SedPlate := 2*Nu_Water/g*(V_SedUp/V_SedCaptureCheck - 1)*(6*V_SedUp/(S_SedPlate*sin(AN_SedPlate)^2*cos(AN_SedPlate))) = 9.4318e-7 m
Z_SedManifoldPipe := Plant_Origin[2] + H_SedSludge + T_ConcreteMin + outerradius(ND_SedJetReverser) + L_SedManifoldDiffuser + innerdiameter(ND_SedManifold, PS_Default)/2 = 0.488608 m
Z_SedFlocWeir := max(Z_SedManifoldPipe + outerradius(ND_SedManifold) + T_ConcreteMin, Z_SedSideSlopes + H_SedSlopesToFlocWeirMin) = 0.969778 m
Z_SedLamellaBottomMin := Z_SedFlocWeir + H_FlocWeirToLamellaMin = 1.06978 m
Z_SedLaunderMin := Z_SedLamellaBottomMin + (L_SedPlate + T_SedPlate)*sin(AN_SedPlate) + T_ConcreteMin + ConRadius(ND_SedLaunder) = 1.75939 m
Z_SedChannelBottomMin := Z_SedLaunderMin + ConRadius(ND_SedLaunder) - H_SedWeirExit = 1.40212 m
# first determine if you need a coupling or not embedded in the channel, flush with the 45 elbow. If you need a coupling you might need to adjust the depth to accomodate the coupling
H_SedHopperAngleFit := Z_SedChannelBottomMin - Z_SedManifoldPipe + ConRadius(ND_SedManifold) = 1.03179 m
H_SedHopperHeightNoCoupling := W_SedInletChannel + W_SedExitChannel + T_ChannelWall + 3*T_SedWeir - W_SedInletChannelPreWeir + S_Fitting + 2*ConRadius(ND_SedManifold) = 1.39942 m
H_SedChanBottomTo45Est := H_SedHopperAngleFit - H_SedHopperHeightNoCoupling = -0.367632 m
EN_SedChannelCoupling :=
    1 if H_SedChanBottomTo45Est > 0
    0 otherwise
    = 0
Z_SedChannelBottom :=
    Z_SedChannelBottomMin if EN_SedChannelCoupling == 0 or H_SedChanBottomTo45Est ≥ CouplingLength(ND_SedManifold)
    (Z_SedChannelBottomMin + CouplingLength(ND_SedManifold) - H_SedChanBottomTo45Est) otherwise
    = 1.40212 m
HW_Sed := Z_SedChannelBottom + HW_SedExitChannel + HL_SedLaunderBod = 1.94272 m
# Flocculator
# Vertical
Pi_VCBaffle := 1/(sqrt(K_FlocBaffle) + 1) = 0.387426
CFD_Constant := 2
ED_FlocBod :=
    10.5*mW/kg if EN_DoubleTrain == 0
    30*mW/kg otherwise
# Monroe put this in to make a later step more clear for vertical. It's just a rearrangement of the above equation.
W_FlocChannelV(Q_Plant, J, S, ED_FlocBod) := (K_FlocBaffle*α_ε(J/S)/(2*J*ED))^(1/3)*Q/S
S_FlocEstVF(ED_FlocBod, Q_Plant, W_FlocChannel, H_Floc) := max((K_FlocBaffle/(ED_FlocBod*H_Floc))^(1/3)*Q_Plant/W_FlocChannel, 1/(ED_FlocBod^(1/4)*Pi_VCBaffle)*(Pi_JetRound*Q_Plant/W_FlocChannel)^(3/4))
S_FlocEstVF(ED_FlocBod, Q_Plant, W_FlocChannel, H_Floc) =  # error: This variable is undefined.
N_FlocChannelSpacesVF(ED_FlocBod, Q_Plant, W_FlocChannel, L_FlocChannel, T_FlocBaffle, H_Floc) := Floor((L_FlocChannel + T_FlocBaffle)/(S_FlocEstVF(ED_FlocBod, Q_Plant, W_FlocChannel, H_Floc) + T_FlocBaffle), 2)
S_FlocVF(ED_FlocBod, Q_Plant, W_FlocChannel, L_FlocChannel, T_FlocBaffle, H_Floc) := (L_FlocChannel + T_FlocBaffle - N_FlocChannelSpacesVF(ED_FlocBod, Q_Plant, W_FlocChannel, L_FlocChannel, T_FlocBaffle, H_Floc)*T_FlocBaffle)/N_FlocChannelSpacesVF(ED_FlocBod, Q_Plant, W_FlocChannel, L_FlocChannel, T_FlocBaffle, H_Floc)
V_FlocVF(ED_FlocBod, Q_Plant, W_FlocChannel, L_FlocChannel, T_FlocBaffle, H_Floc) := Q_Plant/(S_FlocVF(ED_FlocBod, Q_Plant, W_FlocChannel, L_FlocChannel, T_FlocBaffle, H_Floc)*W_FlocChannel)
h_eBaffleVF(ED_FlocBod, Q_Plant, W_FlocChannel, L_FlocChannel, T_FlocBaffle, H_Floc) := K_FlocBaffle*V_FlocVF(ED_FlocBod, Q_Plant, W_FlocChannel, L_FlocChannel, T_FlocBaffle, H_Floc)^2/(2*g)
Ψ_BaffleVF(ED_FlocBod, Q_Plant, W_FlocChannel, L_FlocChannel, T_FlocBaffle, H_Floc) := min((S_FlocVF(ED_FlocBod, Q_Plant, W_FlocChannel, L_FlocChannel, T_FlocBaffle, H_Floc)*K_FlocBaffle/H_Floc)^(1/6), (Pi_JetRound^3/Pi_VCBaffle^4)^(1/6))*(CFD_Constant^(1/6)*(K_FlocBaffle/2)^(1/3)*H_Floc^(2/3))
N_FlocChannelsVF(ED_FlocBod, Q_Plant, W_FlocChannel, L_FlocChannel, T_FlocBaffle, H_Floc) := Ceil(CP_Floc/(N_FlocChannelSpacesVF(ED_FlocBod, Q_Plant, W_FlocChannel, L_FlocChannel, T_FlocBaffle, H_Floc)*Ψ_BaffleVF(ED_FlocBod, Q_Plant, W_FlocChannel, L_FlocChannel, T_FlocBaffle, H_Floc)), 2)
N_FlocSpacesVF(ED_FlocBod, Q_Plant, W_FlocChannel, L_FlocChannel, T_FlocBaffle, H_Floc) := N_FlocChannelsVF(ED_FlocBod, Q_Plant, W_FlocChannel, L_FlocChannel, T_FlocBaffle, H_Floc)*N_FlocChannelSpacesVF(ED_FlocBod, Q_Plant, W_FlocChannel, L_FlocChannel, T_FlocBaffle, H_Floc) - 1
h_eFlocVF(ED_FlocBod, Q_Plant, W_FlocChannel, L_FlocChannel, T_FlocBaffle, H_Floc) := h_eBaffleVF(ED_FlocBod, Q_Plant, W_FlocChannel, L_FlocChannel, T_FlocBaffle, H_Floc)*N_FlocSpacesVF(ED_FlocBod, Q_Plant, W_FlocChannel, L_FlocChannel, T_FlocBaffle, H_Floc)
h_eBaffleVF := h_eBaffleVF(ED_FlocBod, Q_Plant, W_FlocChannel, L_FlocChannel, T_FlocBaffle, H_Floc)
h_eFlocVF := h_eFlocVF(ED_FlocBod, Q_Plant, W_FlocChannel, L_FlocChannel, T_FlocBaffle, H_Floc)
# LFOM
W_Stout(HL_Lfom, z) := 2/(sqrt(2*g*z)*Pi_VenaContractaOrifice*π*HL_Lfom)  # Width of Stout opening area as a function of height (per unit flow!!!)
N_LfomRows(Q_Plant, HL_Lfom) := min(10, max(4, trunc(HL_Lfom/(4*(W_Stout(HL_Lfom, HL_Lfom)*Q_Plant)/(2*π)))))
fB_LfomRows(Q_Plant, HL_Lfom) := HL_Lfom/N_LfomRows(Q_Plant, HL_Lfom)
A_LfomOrificesTop(Q_Plant, HL_Lfom) := Q_Plant*integral(W_Stout(HL_Lfom, z), z = HL_Lfom - fB_LfomRows(Q_Plant, HL_Lfom) .. HL_Lfom)
D_LfomOrificesTopMax(Q_Plant, HL_Lfom) := 2*sqrt(A_LfomOrificesTop(Q_Plant, HL_Lfom)/π)
fD_LfomOrifices(Q_Plant, HL_Lfom, D_Drill) := FloorNearest(min(fB_LfomRows(Q_Plant, HL_Lfom), D_LfomOrificesTopMax(Q_Plant, HL_Lfom)), D_Drill)
V_LfomPipe.Avg(HL_Lfom) := 4/(3*π)*sqrt(2*g*HL_Lfom)
A_LfomPipeMin(Q_Plant, HL_Lfom, Π_LfomSafety) := Π_LfomSafety*Q_Plant/V_LfomPipe.Avg(HL_Lfom)
# Nominal pipe diameter corresponding to the calculated minimum diameter
fND_LfomPipe(Q_Plant, HL_Lfom, Π_LfomSafety, PS_Default) := NominalDiameter(2*sqrt(A_LfomPipeMin(Q_Plant, HL_Lfom, Π_LfomSafety)/π), PS_Default)
fHL_LfomHigh(Q_Plant, Π_LfomSafety, PS_Default) :=
    i ← 0
    while fND_LfomPipe(Q_Plant, HL_LfomMin + i*5*cm, Π_LfomSafety, PS_Default) > ND_LfomPipeMax and HL_LfomMin + i*5*cm < HL_LfomMax
        i ← i + 1
    j ← 0
    while fND_LfomPipe(Q_Plant, HL_LfomMin + i*5*cm, Π_LfomSafety - j*0.05, PS_Default) > ND_LfomPipeMax and Π_LfomSafety - j*0.05 > Π_LfomSafetyMin
        j ← j + 1
    return [HL_LfomMin + i*5*cm; (Π_LfomSafety - j*0.05)*m]
HL_Lfom := fHL_LfomHigh(Q_Plant, Π_LfomSafety, PS_Default)[0] = 0.4 m
D_LfomOrifices := fD_LfomOrifices(Q_Plant, HL_Lfom, D_Drill) = 0.0508 m
Q_ramp(Q_Plant, HL_Lfom) := ramp(fB_LfomRows(Q_Plant, HL_Lfom), fB_LfomRows(Q_Plant, HL_Lfom), HL_Lfom)/HL_Lfom*Q_Plant
fH_LfomOrifices(Q_Plant, HL_Lfom, D_Drill) := ramp(fD_LfomOrifices(Q_Plant, HL_Lfom, D_Drill)/2, fB_LfomRows(Q_Plant, HL_Lfom), HL_Lfom)
Q_LfomActual(Q_Plant, HL_Lfom, D_Drill, RowIndexSubmerged, n_Lfomorifices) :=
    Q ← 0*L/min
    D_LfomOrifices ← fD_LfomOrifices(Q_Plant, HL_Lfom, D_Drill)
    for i ∈ 0 .. RowIndexSubmerged
        Q ← Q + n_Lfomorifices[i]*Q_orificeV(D_LfomOrifices, ramp(fB_LfomRows(Q_Plant, HL_Lfom), fB_LfomRows(Q_Plant, HL_Lfom), HL_Lfom)[RowIndexSubmerged] - ramp(D_LfomOrifices/2, fB_LfomRows(Q_Plant, HL_Lfom), HL_Lfom)[i], Pi_VenaContractaOrifice)
    return Q
N_LfomOrificesperRowMax(Q_Plant, HL_Lfom, D_Drill, PS_Default) := floor(π*fND_LfomPipe(Q_Plant, HL_Lfom, Π_LfomSafety, PS_Default)/(fD_LfomOrifices(Q_Plant, HL_Lfom, D_Drill) + S_LfomOrificesMin))
# A bound on the number of orifices allowed in each row.  The distance between consecutive orifices must be enough to retain structural integrity of the pipe
fN_LfomOrifices(Q_Plant, HL_Lfom, D_Drill, PS_Default) :=
    Q_ramplocal ← Q_ramp(Q_Plant, HL_Lfom)
    D_LfomOrifices ← fD_LfomOrifices(Q_Plant, HL_Lfom, D_Drill)
    H_ramplocal ← ramp(D_LfomOrifices/2, fB_LfomRows(Q_Plant, HL_Lfom), HL_Lfom)
    n[last(H_ramplocal)] ← 0
    for i ∈ 0 .. last(H_ramplocal)
        n[i] ←
            min(max(0, round((Q_ramplocal[i] - Q_LfomActual(Q_Plant, HL_Lfom, D_Drill, i, n))/Q_orificeV(D_LfomOrifices, ramp(fB_LfomRows(Q_Plant, HL_Lfom), fB_LfomRows(Q_Plant, HL_Lfom), HL_Lfom)[i] - ramp(D_LfomOrifices/2, fB_LfomRows(Q_Plant, HL_Lfom), HL_Lfom)[i], Pi_VenaContractaOrifice))), N_LfomOrificesperRowMax(Q_Plant, HL_Lfom, D_Drill, PS_Default)) if fND_LfomPipe(Q_Plant, HL_Lfom, Π_LfomSafety, PS_Default) ≤ 12 in
            max(0, round((Q_ramplocal[i] - Q_LfomActual(Q_Plant, HL_Lfom, D_Drill, i, n))/Q_orificeV(D_LfomOrifices, ramp(fB_LfomRows(Q_Plant, HL_Lfom), fB_LfomRows(Q_Plant, HL_Lfom), HL_Lfom)[i] - ramp(D_LfomOrifices/2, fB_LfomRows(Q_Plant, HL_Lfom), HL_Lfom)[i], Pi_VenaContractaOrifice))) otherwise
    return n
N_LfomOrifices := fN_LfomOrifices(Q_Plant, HL_Lfom, D_Drill, PS_Default)
H_LfomOrifices := fH_LfomOrifices(Q_Plant, HL_Lfom, D_Drill)
HL_Lfom = 0.4 m
N_LfomOrifices = [15; 5; 5; 3; 4; 4]
Y := sum(N_LfomOrifices) = 36
H_LfomOrifices = [0.0254; 0.0920667; 0.158733; 0.2254; 0.292067; 0.358733] m
Π_LfomSafety = 1.5
V_LfomPipe.Avg(HL_Lfom) = 1.18876 m/s
Q_Plant = 0.1 m^3/s
Q_LfomActual(Q_Plant, HL_Lfom, D_Drill, 5, N_LfomOrifices) = 0.10052 m^3/s
B_LfomOrifices := H_LfomOrifices[last(H_LfomOrifices)]
HL_LfomCheck := D_LfomOrifices + B_LfomOrifices
HL_LfomCheck = 0.409533 m
# LFOM channel calculations for high flow
D_LfomChannelOrifice := D_PipeED(E_MaxRM, Q_Plant/2, Pi_VenaContractaOrifice, Pi_JetRound) = 0.261313 m
# A orifice will be added in the channel before the 90 degree bend to ensure macromixing occurs. This will be a orifice in a ferrocement/concrete sheet.
HL_LfomChannelOrifice := h_orifice(D_LfomChannelOrifice, Pi_VenaContractaOrifice, Q_Plant/2) = 0.111656 m
L_LfomChannelOrifices := (D_LfomOrifices + S_LfomOrificesMin)*(N_LfomOrifices[0] + 1) + 2*T_ConcreteMin = 0.9928 m
L_LfomChannel := max(L_LfomChannelOrifices)
ZW_LfomChannel := HW_Sed + HL_Floc + HL_RapidMix + HL_LfomChannelOrifice
Z_LfomChannelBottom := Z_RMChannelBottom
HW_LfomChannel := ZW_LfomChannel - Z_LfomChannelBottom
H_Freefall20 := 20 cm
W_LfomChannel := W_HumanMin = 0.45 m
H_LfomChannel := HW_LfomChannel + H_Freefall20 + HL_Lfom + H_PlantFreeboard
Z_LfomChannelOrifice := HW_LfomChannel - HL_LfomChannelOrifice
HL_LfomChannel := h_frect(Q_Plant/2, W_LfomChannel, HW_LfomChannel, L_LfomChannel, Nu_Water, E_Concrete, 1)
# Entrance Tank
# Heights and Elevations
D_RMOrifice := D_PipeED(E_MaxRM, Q_Plant, Pi_VenaContractaOrifice, Pi_JetRound) = 0.351701 m
HL_RMMicroOrifice := h_orifice(D_RMOrifice, Pi_VenaContractaOrifice, Q_Plant) = 13.6111 cm
HL_RMPipe :=
    h_l(Q_Plant, innerdiameter(ND_RMPipe, PS_Default), 2*HW_EtMax + W_EtWalkway, K_El90 + K_PipeExit, Nu_Water, E_Pvc) if Q_Plant > Q_PlantMaxLF
    h_l(Q_Plant, innerdiameter(ND_RMPipe, PS_Default), 2*HW_EtMax + W_EtWalkway, 3*K_El90 + K_PipeExit, Nu_Water, E_Pvc) otherwise
HL_RMPipe =  # error
