# Only parameters with units need to be entered in this file. The units must be attached as SI (meters, kg, s)
## Flocculation Design
CP_Floc := CP_Floc*m^(2/3)
ED_Floc := ED_Floc*mW/kg
W_FlocChannelMin := W_FlocChannelMin*m
Pi_FlocDissipation := Pi_FlocDissipation
H_FlocOverlapMin := H_FlocOverlapMin*m
S_FlocPort := S_FlocPort*m
Pi_FlocBaffle := Pi_FlocBaffle
## Sed Design
ED_SedInlet := ED_SedInlet*W/kg
# This is the maximum energy disipation rate in the channels that transfer the water from the floc tank to the sedimentation tank
Pi_FlowManifold := Pi_FlowManifold
V_SedUpBod := V_SedUpBod*m/s  # Ratio of min to max flow through ports in inlet manifold
V_SedCBod := V_SedCBod*m/s
# Maximum upflow velocity to allow sludge blanket formation
HW_SedEst := HW_SedEst*m
# We assume a maximum critical velocity for particles to settle in plate settlers
H_SedBetween := H_SedBetween*m
AN_SedTopInlet := AN_SedTopInlet*deg
# Critical velocity must be low enough to allow for almost all
# of the particles to settle out
AN_SedBottomInlet := AN_SedBottomInlet*deg
W_SedSludgeSF := W_SedSludgeSF*m
AN_SedPlate := AN_SedPlate*deg
W_SedSludgeFlat := W_SedSludgeFlat*m
B_SedPlateMin := B_SedPlateMin*m
N_SedLaunders := N_SedLaunders
Pi_Launder := Pi_Launder
HL_SedLaunderBod := HL_SedLaunderBod*m
Pi_QLaunderOrifices := Pi_QLaunderOrifices
B_SedLaunderOrifices := B_SedLaunderOrifices*m
Pi_QSludgeOrifices := Pi_QSludgeOrifices
## Inlet Channel
HW_InletChannelMax := HW_InletChannelMax*m
## Floc Hopper
V_UpFlocHopper := V_UpFlochopper*m/day
## Entrance Tank
V_EtUp := V_EtUp*m/day
