# Expert Inputs
Country := 0
Language := 0
# Tabulated Constants
Rho_H2O := 1000*kg/m^3  # Density of water
Nu_Water := 1*10^-6*m^2/s  # The kinematic viscosity of water.
Rho_FB := 1001*kg/m^3  # Density of Flocs
Re_PipeTransition := 2100
E_Pvc := 0.12 mm
E_Concrete := 2 mm
E_ConcreteLedge := 0.014 mm
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Pi_Jet := 0.4
# This is an empirically determined factor to make the equation
# correct.
Pi_VenaContractaOrifice := 0.63
P_Atm := 1 atm
Nu_Air := 12*mm^2/s
Rho_Air := 1.204*kg/m^3
Rho_Clay := 2.65*gm/mL
ρ_Concrete := 2400*kg/m^3
Plant_Origin := [0; 0; 0]*m
T_PlantWall := 15 cm
T_ConcreteMin := 5 cm
EN_DrillSeries := 0  # 0 is English, 1 is metric
EN_TubeSeries := 0
W_HumanMin := 0.45 m
H_HumanAccess := 1.5 m  # The height of the walkway above the drain channel bottom so that someone can walk through the drain channel.
acad_version := 2008
H_Freefall := 0.1 m
H_PlantFreeboard := 0.1*m
EN_PlantDrains := 1  # Set to zero if drains on left, 1 if drains on right
D_Rebar := 1/2*in
ND_SpacerPipe := 3/4*in
S_Fitting := 5 cm  # minimum space between fittings in a tank or fittings and the wall of the tank.
W_ChannelMin := 15 cm  # Minimum channel width for constructability
W_DeepChannelMin := 30 cm  # Minimum channel width for a deep channel. Assumes you may need to stick your head in the channel.
H_DeepChannelMax := 60 cm  # The maximum depth of a channel, based on having your arm reach to the bottom of the channel.
S_ChannelPipeWall := 2 cm  # Extra space allowed on both sides of pipe to avoid interference with the channel walls
Π_Rectangular := 1/2  # Π.Rectangular is defined as the optimum "height over width ratio" (1/2) for a rectangular open channel
HL_ChannelMax := 5 cm
EN_MatApply := 1  # EN.MatApply equals 0 if materials are not to be applied, otherwise materials are applied
USD := ¤  # Defining US Dollars as a currency unit
Lem := USD/19.06  # Lempira/US Dollar exchange rate as of 3/5/2012
EN_Water := 0  # Equals 1 to draw boxes showing max water levels, 0 normally
# If EN_Water is set to 1, this controls the filter operation mode for which water/sand elevations are drawn. 0 for terminal, 1 for clean bed, and 2 for backwash.
EN_FilterWater := 2
EN_DoubleTrain :=
    1 if Q_Plant ≥ 70*L/s
    0 otherwise
    = 0  # error: This variable is undefined.
Q_Plant :=
    Q_Plant/2 if EN_DoubleTrain == 1
    Q_Plant otherwise  # error: This variable is undefined.
# General Assumptions and Constants
Π_Lfomorifice := 10  # Number of rows in lfom.  note: execution time of the lfom file exponentially increases with this number.
Π_LfomSafety := 1.5  # sefety coefficient for lfom pipe diameter
Π_LfomSafetyMin := 1.15
# minimum safety coefficient for lfom pipe diameter; only reduced between 55 L/s and 70 L/s - the intermediate zone between the using an LFOM pipe and an LFOM channel
HL_Nlfom := 40 cm  # head loss through nonlinear orifice meter (simple orifice)
HL_LfomMin := 10 cm  # Minimum range of head loss through linear orifice meter
HL_LfomMax := 40 cm  # Maximum range of head loss through linear orifice meterto be used as needed for high flow plants.
HL_CdcCoag := HL_LfomMin
H_LfomSF := 5 cm
N_Lfom := 1
ND_LfomPipeMax := 12 in
S_LfomOrificesMin := 5 mm  # Difference between the height of the water in floc tank and the bottom set of holes on the linear flow orifice meter
H_LfomFreefall := 5 cm
# Both of these assumptions were tested over a range of flow rates and found to give reasonable Lfom configurations.
Pi_Sutro := 0.1
Pi_Lfomorifice := 20
LFOM_Mod := 0  # All .Mod variables have to do with the modular code, they are always set to zero for the plant drawing.
EN_LfomPipe :=
    0 if Q_Plant ≥ 70*L/s or EN_DoubleTrain == 1
    1 otherwise
    = 1  # error: This variable is undefined.
# Flow Orifice Meter
# Entrance Tank
EN_EtGrit := 0  # 0 if we want hoppers, 1 otherwise
EN_TwoInlets := 0  # 0 if there is only one inlet, 1 if there is two inlets
AN_EtSlopeMax := 45 deg  # Angle of the sloped walls of the entrance tank hoppers
V_EtUpMin := 8*mm/s
HL_EtFloc := 5 cm
HW_EtMin := 20 cm  # Minimum water level in the entrance tank
HW_EtMax := 1.5 m  # Maximum total water depth of the entrance tank to ensure easy access to drain plugs
ND_EtFloat := 8 in
S_EtFloat := 10 cm  # Extra space around the float (increase in effective diameter) to ensure that float has free travel
ND_EtDrainMin := 3 in  # Minimum pipe size to handle grit and to ensure that the pipe can be easily unclogged
Ti_EtDrain := 1 min
# Time required to have contents of one hopper drain. Note that during this time it is assumed that the water level in the entrance tank remains constant.
ND_EtDrain := 3 in  # This is constant for now
EN_LinearFlow := 1  # 1 if using Lfom, zero if using nonlinear system
T_EtRemovableWall := 5 cm  # Parameters are arbitrary - need to be calculated
H_EtRemovableWallSupport := 4 cm
T_EtRemovableWallSupport := 5 cm
T_EtHopperLedge := 15 cm
H_EtWeirFreefall := 2 cm
T_EtWeir := 6 cm
HL_RMMicroOrifice := 0 m
E_MaxRM := 1*W/kg
L_EtSupport := 40 cm
L_FlocCouplingExt := 5 cm
T_RMOrificePlate := 2 cm
ND_RMAirRelease := 1 in
T_LfomSheet := T_ConcreteMin
# Rapid Mix
Pi_Dmix := 2.4  # ratio of diffusion length scale to kolmogorov length scale (smallest eddies in turbulent flow)
Tau_Diffusion := 10 s  # time scale of diffusion
D_m := 0.673*10^-5*cm^2/s  # Diffusion coefficient
# Chemical Storage Tanks
EN_Coag := 1  # 0 is alum, 1 is PACl
C_CoagStockMax := 200*gm/L
C_ChlorineStockEst := 50*gm/L
C_FilterCoagStockEst := 16*gm/L
C_CoagDoseMax := 80*mg/L
C_ChlorineDoseMax := 2*mg/L
C_FilterCoagDoseMax := .60*mg/L
C_ChlorineStockMax := 15*gm/L
Ti_CoagStock := 30 hr
Ti_ChlorineStock := 30 hr
Ti_FilterCoagStock := 30 hr
# This is the elevation difference between the outlet of the coagulant stock tanks and the water level in the constant head tank, which is set by the hydraulic head required to provide the desired max chemical flow rate through the float valve orifice in the CHT. It is treated as constant here to ensure a practical amount of space is left between the stock tanks and the CHT even when a float valve is selected which requires very little hydraulic head to deliver the required maximum chemical flow rate.
H_CoagTankAboveHeadTank := 30 cm
T_ChemTankWall := 5 mm
B_StockOutlet := 10 cm  # This is the distance from the bottom of the stock tanks to the outlets to allow space for solids to settle.
S_ChemTankBorder := 15 cm  # Distance between a tank and the border of the platform
S_ChemTanks := 40 cm
S_ChemTankToWall := 1 m  # Distance between the tanks and the wall for operator mobility.
FilterCoag := 0  # this variable is set to zero if filter coagulant is not being used
# Supplier Information:
# http://www.rotoplas.com/assets/files/industria/catalogo.pdf
# Tank Volume | Tank Diameter | Tank Height
Vol_SupplierChemTank := [208.198 L; 450 L; 600 L; 750 L; 1100 L; 2500 L]
Dimensions_SupplierChemTank := [22.5 in, 33.5 in; 0.85 m, 0.99 m; 0.96 m, 1.10 m; 1.10 m, 1.02 m; 1.10 m, 1.39 m; 1.55 m, 1.65 m]
Factor := [1.05; 1.05; 1.05; 1.05; 1.05; 1.05]
# Chemical Dose Controller
D_TubeEnglish := [1; 2; 3; 4; 5; 6; 7]*in/16
D_CdcBarb := [0.047 in; 0.075 in; 2.5 mm; 3 mm; 4 mm; 0.201 in]
D_TubeMetric := [2; 3; 4; 6; 8; 10]*mm
D_CdcBarb1 := [0.047 in; 0.07 in; 0.075 in; 2.5 mm; 3 mm; 0.201 in]
E_Tube := 0 mm  # Tubing roughness height
# This is the estimated elevation difference between the water level in the constant head tank and the top of the entrance tank wall. The constant head tank water level is the same as the elevation of the outlet of the dosing tube when the lever arm is horizontal (zero flow). Therefore this height depends only on the hardware used to make the slider/drop tube assembly and to mount the lever arm to the entrance tank wall. Note that this will vary depending on hardware used, and is only defined here to calculate the elevation of the stock tanks, which can be approximate.
H_DoserAssembly := 6.77 cm
Π_LinearCdcError := 10 %
# Maximum error allowed between a linear flow vs tube head loss relationship and the actual performance (which is affected by non-linear minor losses), assuming calibration at the maximum flow rate
K_CdcTube := 2  # Estimated minor loss coefficient for the small-diameter flexible tubing using fittings that have larger ID than the tubing
HL_CdcCoag = 0.1 m
# Maximum head loss through the small-diameter tubing, which corresponds to the variation in water levels in the entrance tank and the difference between the maximum and minimum elevation of the dosing tube outlet attached to the lever arm.
HL_CdcChlorine := 10 cm
# The maximum chlorine head loss is set to 10cm to keep the length of tubing low. This means that the chlorine doser will be calibrated with the 2 mg/L dose at the middle of the lever arm.
D_FltVlvOrificesAvail := [0.093 in; 0.187 in; 0.25 in; 0.312 in]
H_CdcFloatvalve := 5 cm  # Estimated distance between fluid level in constant head tank and orifice for float valve
# Chemical Dose Controller Dimensions (based on inserted drawings)
L_CdcLever := 0.45 m  # assumed from Drew's drawing for now
W_LeverArm := 0.0032 m
D_LATeetoLAOrigin := 0.0079 m
D_CdcCht := 6 in
D_LeverOrigintoArm := 0.0336 m  # Distance from the lever arm origin (which is on the tee holding the lever arm up) to the lever arm
H_LeverHole := 0.0312 m - 0.0095/2*m
# Distance from the top of the entrance tank to the to the middle of the lever arm hole for the cable - (minus the) radius of the hole
D_Cable := 0.1 in
D_LABracketOrigintoEndBracket := 0.0079 m
# This is the distance from the lever arm bracket origin (at the center of the hole of the bracket holding up the lever arm) to the end of the bracket
D_LeverHole := 0.0063 m  # Distance from the float end of the lever arm to the middle of the hole where the float cable will be attached.
D_LABOrigintoLAOriginX := 0.032 m
D_LABOrigintoLAOriginZ := 0.0254 m  # Edited DLABOrigintoLAOriginZ to accommodate dimensions from McMaster vs Inserted Drawing
T_CdcDt := 0.003 m  # Thickness of the drop tube
L_LAOriginToDtX := 0.0290 m  # Distance from the lever arm origin to the center of the drop tube in the x direction
L_LAOriginToDtY := 0.7812 m  # Distance from the lever arm origin to the outside center of the top part of the drop tube in the y direction
L_LAOriginToDtZ := 0.0429 m  # Distance from the lever arm origin to the drop tube in the z direction
L_LAOriginToDtCenterX := 0.0290 m  # Distance from the lever arm origin to the center of the drop tube in the x direction
T_CdcReducer := 0.0095 m  # Measured from CDC research team's apparatus
L_LAOriginToReducerX := 0.0290 m  # Distance from the lever arm origin to the center of the reducer in the x direction
L_LAOriginToReducerY := 0.7315 m  # Distance from the lever arm origin to the outside center of the top part of the reducer in the y direction
L_LAOriginToReducerZ := 0.1094 m  # Distance from the lever arm origin to the center of the large part of the reducer in the z direction
L_LAOriginToReducerCenterX := 0.0290 m  # Distance from the lever arm origin to the center of the reducer in the x direction
L_LAOriginToReducerCenterY := 0.7919 m  # Distance from the lever arm origin to the center of the reducer in the y direction
L_LAOriginToDtX2 := 0.0396 m
L_LAOriginToDtY2 := 0.7919 m
L_Slider := 3 in
R_LArmBar := 3/16*in
D_LArmBar := 3/8*in
W_LBracket := 5/8*in
L_LBracket := 1.5 in
T_LBracket := .08 in
L_LArmBar := 4 in
W_Slider := 3.2*10^-3*m
ND_DropTube := 1/2*in
L_DropTube := .61 m
H_Slider := 5/8*in
H_LeverArm := 0.0254 m
L_LAOriginToReducerX2 := 0.0893 m
L_LAOriginToReducerY2 := 0.7919 m
OD_CdcFitting := 5/32*in  # Outer diameter of fitting- measured from CDC research team's fitting
ID_CdcFitting := 0.126 in  # Inner diameter of fitting- measured from CDC research team's fitting
L_CdcFitting := 0.75 in  # Length of fitting - measured from CDC research team's fitting
# Flocculator
Q_PlantMaxLF := 3*L/s  # Prompts the transition to a low flow flocculator.
T_FlocBaffleRigidH := 15 cm
T_FlocBaffleRigidV := 5 cm
H_FlocOption := 0
L_ChannelSlot := 5 cm  # Low flow flocculator ferrocement slots - length extending into the flocculator wall
# The minor loss coefficient is 2. According to measurements at Agalteca and according to
# https://confluence.cornell.edu/display/AGUACLARA/PAHO+Water+Treatment+Publications (page 100 in chapter on flocculation)
K_FlocBaffle := 2.5
# Increased both to provide a safety margin on flocculator head loss and to simultaneously scale back on the actual collision potential we are trying to achieve.
S_FlocBaffleSetBackPlastic := 2 cm
# increased to 100 at the request of Dan and Sarah
CP_Floc := 75 m^(2/3)  # value decreased 1/26/12
Pi_JSOptimal := 3
Pi_JSMin := 2
Pi_FlocBaffleMin := 1
Pi_FlocBaffleMax := 1.5
ED_Floc :=
    10.5*mW/kg if EN_DoubleTrain == 0
    30*mW/kg otherwise  # error: This variable is undefined.
# Increased from 6 to 10 on 7/14/2011 to compensate for increase in Pi.Jet from 0.38 (in flocculator) and 0.34 (in ports, pipes, channels) to a new value of 0.4.
# Increased from 10 to 10.5 on 5/4/2011 for La Libertad
Ti_FlocDrain := 30 min
ND_FlocModulesMain := 1/2*in  # The piping size for the main part of the floc modules
ND_FlocModulesLarge := 1.5 in  # The diameter of the oversized cap used to assemble the floc modules
T_FlocChannelWallMidFlow := 15 cm
# Sedimentation Tank
L_SedEst := 4 m
ND_SedManifoldMin := 6 in  # Smallest size of manifold we will use because smaller manifolds create sed tanks that are too short?
ND_SedManifoldMax := 8 in  # This might be reduced to a smaller pipe size to make the manifolds easier to manage.
N_SedTanksMin := 3
L_SedPlateSheet := 300 cm
W_SedPlate := 42 in
W_SedBay := W_SedPlate
W_Plastic := W_SedPlate
T_SedPlate := 0.2 cm
T_SedWeir := 4 cm
T_SedWallDivider := 15 cm
V_SedUpBod := 1*mm/s  # changed from 0.8 mm/s to 1 mm/s  on 8/13/2011 to obtain a better upflow velocity in the bottom of sed tanks for floc blankets.
V_SedCBod := 0.12*mm/s
V_UpFlocHopper := 0.35*mm/s
AN_SedSlope := 50 deg  # Angle of the sloped bottom of the sed tank. Changed from 60 to 50 on 8/13/2011 to reduce construction costs.
AN_SedPlate := 60 deg
AN_SedHopperSlope := 45 deg
HW_SedEst := 2 m
Pi_SedCell := 2
# This is equivalent to saying that all of the kinetic energy contained in the flow will be dissipated over a length scale of 2 times the smallest dimension of flow.
# Inlet Channel
Perpendicular_Weir := 0
Parallel_Weir := 1
Inlet_FullDepth := 2
ED_SedInlet := ED_Floc  # error: This variable is undefined.
HL_SedWeirMax := 5 cm
# Inlet Manifold
B_SedManifoldPortEst := 10 cm
Pi_FlowManifold := 0.8
# Minimum spacing between the side of the manifold pipe and the sloped walls of the tank. Relevant only when the manifold is designed to be set low in the tank, between the sloped walls.
S_SedManToSlopeMin := 10 cm
# Exit Launder
HL_SedLaunderBod := 4 cm  # target headloss in sed launders
Pi_Launder := 0.95
Pi_QLaunderOrifices := 0.80
B_SedLaunderOrificesEst := 10 cm
# Vertical distance from the top of the plate settlers to the bottom of the exit launder.
L_SedLaunderCapExcess := 3 cm  # The additional length needed in the launder cap pipe that is to be inserted into the launder coupling
# Sludge Drain
Pi_QSludgeOrifices := 0.85
B_SedSludgeOrificesEst := 10 cm
Ti_SludgeDrain := 30 min
M_DrainCoverMax := 20 kg
S_SedDrainCoverSegment := 2 mm
# Plate Settler Modules
N_SedPlateCol := 1  # number of columns of Plate Settlers - this is a constant!
S_SedPlateMin := 2.5 cm  # This is to prevent floc roll up. We should specify this in a more fundamental way. (based on velocity gradients)
S_SedPlate := S_SedPlateMin
ND_SedModulePipe := 0.5 in  # Diameter of the pipe used to hold the lamina together
ND_SedModulePipeSpacer := 3/4*in  # Diameter of the ledge that serves as a ledge for the plate setter to lie on.
S_SedPlateModuleMin := 2 cm
L_SedPlateCantilevered := 20 cm
# Maximum length of sed plate sticking out past module pipes without any additional support. The goal is to prevent floppy modules that don't maintain constant distances between the plates
B_SedPlate := S_SedPlate + T_SedPlate
N_SedModulePlatesMax := floor(L_SedPlateCantilevered/B_SedPlate*tan(AN_SedPlate) + 1) = 13
N_SedModulePlatesMin := 8
PlateIndex :=
    for j ∈ N_SedModulePlatesMin .. N_SedModulePlatesMax
        for i ∈ 0 .. 50
            matrix[i, j - N_SedModulePlatesMin] ← j*(i + 1)
    array ← matrix[:, 0]
    for j ∈ N_SedModulePlatesMin + 1 .. N_SedModulePlatesMax
        array ← stack(array, matrix[:, j - N_SedModulePlatesMin])
    array ← sort(array)
    i ← 0
    while i < (last(array) - 1)
        array ← stack(submatrix(array, 0, i, 0, 0), submatrix(array, i + 2, last(array), 0, 0)) if array[i] == array[i + 1]
        array ← submatrix(array, 0, i + 1, 0, 0) if (i + 1 == i + 2 and i + 2 == last(array))
        i ← i + 1
    return array
# Plate Settler Pipe Frame
ND_SedPlateFrame := 1.5 in
B_SedFrameSupport := 1/3*m
T_Flange := 1 cm
ND_SedFrameStub := 1/2*in
B_SedPlateFrameVertical := 10 cm  # Distance from the wall to the vertical pipe of the main plate settler support frame
D_Flange := 6 in
# Floc Weir
H_SedSlopesToFlocWeirMin := 15 cm
H_FlocWeirToLamellaMin := 10 cm  # Vertical distance from the top of the floc weir to the bottom of the plates.
L_FlocHopperEst := 1 m
H_SedSlotDepth := 2 cm
T_SedWeirBaffle := 3 cm
ND_SedHopperDrain := 1 in
ND_SedHopperViewer := 2 in
ND_SedSkimmer := 2 in
# Diffusers/Jet Reverser
W_SedDiffuserOutlet := 1 cm
ND_SedDiffuser := 1 in
ND_SedJetReverser := 3 in
# Stacked Rapid Sand Filter
# Construction and Design Inputs
T_FiWall := 25 cm
ND_FiKeyPipe := 1.5 in
# Schedule 40 or Schedule 80 for slotted branches????? Schedule 40 has larger ID and that increases the max flow rate it can handle and thus increases the allowable width of the filter. Schedule 40 for strength and servicability. This changes the dimensions of the filter box and the constraints for the entrance and exit boxes.
PS_FiBranch := 2
# Design guidelines say 11 mm/s. The success of lab-scale backwashing at 10 mm/s suggests that this is a reasonable and conservative value
V_FiBw := 11*mm/s
N_FiLayer := 6
V_FiLayer := V_FiBw/N_FiLayer = 1.83333 mm/s
H_FiLayerMin := 20 cm  # Depth of each filter layer
B_FiManifoldBranch := 10 cm
ND_FiManBranch := 1 in
# We are going to take this pipe size for the slotted pipes as a given. Larger pipes may block too much flow and they are harder to install.
ND_FiBwManBranch := 1.5 in
W_FiManSlots := 0.008 in = 0.2032 mm  # A slot thickness of 0.008 in or 0.2 mm is selected so that sand will not enter the slotted pipes.
B_SlotsAvailable := [1/8*in; 3/16*in; 1/4*in] = [3.175; 4.7625; 6.35] mm  # These are the possible spacings for the slots that our supplier can fabricate
ND_FiBranchHolder := 2 in
ND_FiBwBranchHolder := 2 in
S_FiTrunkMin := 3 cm  # Minimum vertical spacing between trunk line pipes going through the filter wall for concrete construction
S_FiManAssembly := 1 cm
# Space between the ends of the branch receiver pipes and the walls so that the manifold assemblies are easy to lower into the filter boxes (if the branch receivers extended the entire length of the box they would just barely fit and it would be hard to get into place.
L_FiManFerncoCoupling := 4 cm
L_FiManBranchExt := 2 cm  # How far the branch extends into the trunk line
Ti_FiBwInitiationBod := 3 min  # AKA time to drain the filter box of the water above the fluidized bed
HL_FiBwSF := 20 cm  # This is the extra head we are going to provide to ensure that we can initiate backwash.
HL_FiSiphonMax := 20 cm  # Maximum acceptable head loss through the siphon at SS; used to calculate a diameter
ND_FiSandOutlet := 2 in
H_FiDistBarrier := 10 cm
L_FiSiphonChannelStubMin := 20 cm
# Being able to shorten the stub from which the siphon discharges into the main plant drain channel allows for some flexibility in the hydraulic design.
HL_FiEntrancePipeMax := 10 cm
ND_FiTrunkMax := 6 in
W_FiInletChannelMin := 30 cm
# Elevation Safety Margins
H_FiBwNoSuckAir := 20 cm  # Minimum depth in the entrance box during backwash such that there is standing water over the inlet.
H_FiSiphonNoSuckAir := 10 cm  # Minimum depth over the orifices in the siphon manifold so that there is standing water and air is not entrained.
H_FiFluidizedBedToSiphon := 20 cm
H_FiForwardNoSuckAir := 10 cm
H_FiWeirFreefall := 3 cm
H_FiAirRemovalBlockSubmerged := 5 cm
H_FiBypassSafety := 10 cm
H_DrainOutletSafety := 10 cm
H_FiOverflowWeirFreefall := 10 cm
# Sand Properties
D_FiSandES := 0.5 mm
Pi_UCFiSand := 1.65
D_FiSand60 := D_FiSandES*Pi_UCFiSand = 0.825 mm
ε_FiSand := 0.4  # Porosity in a sand bed
Rho_FiSand := 2650*kg/m^3
Pi_FiFluidized := 1.3  # Bed expands 30% when fluidized
k_Kozeny := 5  # Carman-Kozeny coefficient
T_PltWall := T_PlantWall  # Create specific variables for each wall thickness so that after the structural analysis is done we can update the variables here.
T_EtWall := T_PlantWall
T_ChannelWall := 15 cm
T_LfomChannelWall := T_ChannelWall
T_Floor := 20 cm
# Wall Thicknesses
W_MpWalkwayMin := 1*m  # combine walkway assumptions!
W_DCWalkway := 1 m  # Width of the walkway above the main plant drain channel.
W_EtWalkway := 1 m  # Width of the floor space between the flocculator and the rapid mix pipe floor cutout next to the entrance tank.
W_TrainWalkway := 1.5 m  # for high flow, double train situations
S_Operator := 0.5 m  # Extra space surrounding the chem tanks for the operators to move.
# Operator Access
# Minor Loss Coefficients
# Individual K Values | Expansions | Contractions
K_El90 := 0.9  # 90 deg elbow
# 45 deg elbow
diamratio_exp0.75 := 0
diamratio_cont0.75 := 0
K_El45 := 0.45
# The loss coefficient for the channel transition in a 90 degree turn
diamratio_exp0.25 := 0
diamratio_cont0.25 := 0
K_90 := 0.4
diamratio_cont0.5 := 0
diamratio_exp0.5 := 0
K_GateValve := 0.39
K_ChkValveConv := 4
K_ChkValveBall := 4.5
K_SlopeExit := 2
K_GlobeValve := 10
K_AngleValve := 4.3
K_Exp := 1  # headloss coefficient of jet
K_Exp0.75 := 0.18
K_Exp0.5 := 0.55
K_Exp0.25 := 0.25
K_Cont0.75 := 0.18
K_Cont0.5 := 0.33
K_Cont0.25 := 0.43
K_RmLfom := 1  # Accounts for the exit into the flocculator from the straight Lfom.
K_RmOrifice := 1.3  # Minor Loss coefficient for the water flowing over the water fall weir, prior to orifice mixing.
K_ReturnBend := 1.5
K_TeeFlowRun := 0.6
K_TeeFlowBr := 1.8
K_FlocBaffle180 := 4
K_LTurn90 := 0.45  # K.lturn is the K value for a long radius ninety degree turn
K_PipeEnt := 0.5  # K.ent is the K value for a pipe entrance
K_PipeExit := 1
K_SedSlopeExit := 1  # Exit coefficient from manifold to sed tank.
K_Sum(N_Elbow45, N_Elbow90, N_TeeRun, N_TeeBr, GateValve, GlobeValve, AngleValve, CheckValveConv, CheckValveBall) :=
    K_2 ← N_Elbow45*K_El45 + N_Elbow90*K_El90
    K_3 ← K_TeeFlowRun*N_TeeRun + K_TeeFlowBr*N_TeeBr
    K_4 ← GateValve*K_GateValve + GlobeValve*K_GlobeValve + AngleValve*K_AngleValve + CheckValveConv*K_ChkValveConv + CheckValveBall*K_ChkValveBall
    K_Sum ← K_2 + K_3 + K_4
    return K_Sum
K_FiEntrancePipe := K_El90 + K_PipeEnt + K_PipeExit = 2.4
# Drain Channels
Slope_PlantDC := 1 %
Slope_EtDC := 1 %
W_EtDCMin := 20 cm
