## Flow Control Module Design
# Select the set of available tubing diameters
# Select the kinematic viscosity. The kinematic viscosity of water is 1*10^-6*m^2/s.
# Select the maximum for the range of head loss the flow control module will use
# Select the minimum length of tubing. Normally this must be longer than the maximum head loss.
# Select the maximum length of tubing you are willing to use.
# [component: outputs tubediameterunitsystem]
# [component: outputs viscosity]
# [component: outputs h_fmax]
# [component: outputs L_min]
# [component: outputs L_max]
Q_Plant := 5*L/s
C_Stock := 120*gm/L
# 10^-6*m^2/s | cm | cm | m
C_CoagMax := 60*mg/L
D_metric := [1; 2; 2.4; 2.9; 4; 5; 6; 6.5; 7]*mm
Q_max := Q_Plant*C_CoagMax/C_Stock = 2.5 mL/s
h_fmax := h_fmax*cm = 20 cm
L_min := L_min*cm = 70 cm
# The length of the tube has to be at least as great as the maximum head loss with some additional length to be able to reach the ports
L_max := L_max*m = 1.5 m  # The maximum length of tubing that we are willing to use.
D_english := [0.0625; 0.066; 0.0937; 0.096; 0.106; 0.125; 0.1875; 0.25; 0.375; 0.5; 0.625; 0.75; 1]*in
# 2.4 2.7
D_CdcAvailable :=
    D ← D_metric if tubediameterunitsystem
    D ← D_english otherwise
    return D
ν := viscosity*10^-6*m^2/s = 1e-6 m^2/s
D_CdcAvailable = [1; 2; 2.4; 2.9; 4; 5; 6; 6.5; 7] mm
Re_max := 2100
D_english = [1.5875; 1.6764; 2.37998; 2.4384; 2.6924; 3.175; 4.7625; 6.35; 9.525; 12.7; 15.875; 19.05; 25.4] mm
# This is the maximum flow that can be sent through the alum feeder without requiring extremely long tubes is based on eliminating diameter from the Hagen-Poiseuille equation by using the maximum Reynolds number constraint. For higher flows multiple parallel tubes could be used. However the maximum flow rate that can be handled by the float valve needs to be considered.
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Q_maxlaminar(L_max, h_fmax, ν) := (L_max*Re_max^4*π^3*ν^5/(2*g*h_fmax))^(1/3)
Q_maxlaminar(L_max, h_fmax, ν) = 6.13215 mL/s
# Minimum diameter required to get laminar flow at max flow based on Reynolds number for transition to turbulence
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D_minlaminar(Q_max, ν) := 4*Q_max/(π*ν*Re_max)
# Now we can calculate the diameter of tubing required to accomodate the largest flow that a flow control module can deliver withohut requiring an excessively long tube
D_minlaminar(Q_maxlaminar(L_max, h_fmax, ν), ν) = 3.71795 mm
# Length of tube required to get desired head loss at maximum flow based on the Hagen-Poiseuille equation.
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L_tube(Q_max, D, h_fmax, ν) := h_fmax*g*π*D^4/(128*ν*Q_max)
# Minimum diameter of tubing to produce the desired head loss at the maximum flow using the minimum feasible length of tubing. Based on the Hagen-Poiseuille equation.
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D_minheadloss(Q_max, L_min, h_fmax, ν) := (128*ν*Q_max*L_min/(h_fmax*g*π))^(1/4)
# The minimum diameter is the maximum of the diameter calculated by the previous two equations. A larger diameter could be used if a longer tube is used.
D_min(Q_max, L_target, h_fmax, ν) := max(D_minheadloss(Q_max, L_target, h_fmax, ν), D_minlaminar(Q_max, ν))
# Define a range of flows that we will use to plot the results.
Q_range := 10*mL/min, 20*mL/min .. Q_maxlaminar(L_max, h_fmax, ν)
## Tube diameter constraints
# Now let's add the constraint of given tube diameters. First we write a function that will round up to the up to the next available tube size.
forceround(x, xarray, direction) :=
    xarray ← sort(xarray)
    i ← 0
    while x > xarray[i]
        i ← i + 1
    return xarray[i - 1 + direction]  # direction is for rounding up (1) or rounding down (0).
# Now we use the forceround function to find the design tube diameter based on the minimum tube diameter and the available tube diameters.
D_Max(L_max, h_fmax, ν) := forceround(D_minlaminar(Q_maxlaminar(L_max, h_fmax, ν), ν), D_CdcAvailable, 0)
D_Max(L_max, h_fmax, ν) := forceround(D_min(Q_maxlaminar(L_max, h_fmax, ν), L_max, h_fmax, ν), D_CdcAvailable, 0)
# These two equations are identical BECAUSE the constraint is laminar flow and thus the head loss constraint isn't used.
D_MaxDesign := D_Max(L_max, h_fmax, ν)
D_MaxDesign = 2.9 mm  # This is the max diameter of tube that meets laminar flow and head loss constranits.
# want to find the maximum flow that we can get from our largest diameter tube. We need to use the laminar flow constraint because that dominates for high flows.
Q_MaxDesign := π*D_MaxDesign*Re_max*ν/4 = 4.78307 mL/s
D == 4*Q_max/(π*ν*Re_max)
D_design(Q_max, L_max, h_fmax, ν) := forceround(D_min(Q_max, L_max, h_fmax, ν), D_CdcAvailable, 1)
# At very low flows the design will fail given a finite set of tube diameters. Thus calculate the minimum design flow that can be produced based on the Hagen-Poiseuille equation.
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Q_min(L_max, h_fmax, D_min, ν) := h_fmax*g*π*D_min^4/(128*ν*L_max)
Q_min(L_max, h_fmax, D_CdcAvailable[0], ν) = 0.0320922 mL/s
# Redefine the flow rate to only include the feasible range given the constraints. Note that the minimum flow plotted is the minimum design flow. The design flow is the maximum flow for a flow control module.
Q_range := Q_min(L_max, h_fmax, D_CdcAvailable[0], ν), Q_min(L_max, h_fmax, D_CdcAvailable[0], ν) + 1*mL/min .. Q_maxlaminar(L_max, h_fmax, ν)
# The maximum tube length constraint may be violated if there aren't enough available tubing diameters.
D_tube := D_design(Q_max, L_min, h_fmax, ν)
L_design := L_tube(Q_max, D_tube, h_fmax, ν)  # designs for the particular flow rate
D_tube = 2.9 mm
D_tube = 0.114173 in
L_design = 1.36189 m
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d_orifice := 0.093
D_english = [1.5875; 1.6764; 2.37998; 2.4384; 2.6924; 3.175; 4.7625; 6.35; 9.525; 12.7; 15.875; 19.05; 25.4] mm
# If you set the max tubing length such that a small region meets that criteria it can cause a noncontinuos solution with a gap that has too high a tubing length.
N_TubesMax := 4
Q_Coag := 5.1*mL/s
D_MaxDesign = 2.9 mm
Q_MaxDesign = 4.78307 mL/s
N_Tubef(Q_Coag) := ceil(Q_Coag/Q_MaxDesign)
Q_CoagMaxLinear := N_TubesMax*Q_MaxDesign
N_Tube := N_Tubef(Q_Coag) = 2
Q_Tube(Q_Coag) := Q_Coag/N_Tubef(Q_Coag)
Q_CoagRange := 2*mL/s, 2.1*mL/s .. Q_CoagMaxLinear
D_tube := D_design(Q_Tube(Q_Coag), L_min, h_fmax, ν) = 2.9 mm
L_design := L_tube(Q_Tube(Q_Coag), D_tube, h_fmax, ν) = 1.33519 m
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Q_CoagRange = [
    2e-6; 2.1e-6; 2.2e-6; 2.3e-6; 2.4e-6; 2.5e-6; 2.6e-6; 2.7e-6; 2.8e-6; 2.9e-6
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] m^3/s
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# Questions
# max flow for small float valve (where design flips to larger valve)
# Min diameter of supply flexible tubing to CHT at MAX flow of linear dose controller.
# Evaluate whether it is reasonable to always uses this large diameter of supply tubing.
# Determine appropriate diameters for calibration columns
# Is the calibration column fixed or movable?
# Is there one diameter of dosing tubing that will work for allllll flows?
#
# Is all of our logic correct in this sheet? simplify and beautify and document better than Monroe did!
#
# When calibrating a CDC you start with a piece of tubing that is too long. You measure the flow at max head loss. How do you use that information to figure out how long to make the tubing?
#
# What is the min length of tube for the diameter that you are using to maintain laminar flow? This should be reported in the design documentation as a warning to not cut the tube shorter than this length.
