## Filtration Model
# [reference: FractalFlocModel.xmcd]
# Tufenkji, N. and M. Elimelech (2004). "Correlation equation for predicting single-collector efficiency in physicochemical filtration in saturated porous media." Environmental-Science-and-Technology 38(2): 529-536.
# The model is based on Tufenkji and Elimelech but corrected to eliminate artificial dependencies on irrelevant parameters!
## Physical constants
ρ_w := 1000*kg/m^3
μ := 0.00089*newton*sec/m^2
ν := μ/ρ_w
# annotation to a formula above: Viscosity of Water, from CRC Handbook of Tables for Applied Engineering Science, 2nd edition, edited by R. Bolz and G. Tuve, CRC Press (1973).
k_b := 1.3806505*10^-23*joule/K
# annotation to a formula above: from The NIST Reference on Constants, Units, and Uncertainty, from CODATA Recommended Values of the Fundamental Constants - 2002, by Peter J. Mohr and Barry N. Taylor, National Institute of Standards and Technology.
A := 0.75*10^-20*J
## Model inputs
d_p := D_Clay, D_Clay + 0.1*μm .. 100 μm
ρ_p := 2650*kg/m^3
V_a := 1.8*mm/s
Τ := 293 K
z := 20 cm
d_c := 0.5 mm
α := 1
ε_por := 0.4
## Dimensionless groupings
## Geometric groups
Π_R(d_c, d_p) := d_p/d_c
Π_z(z, d_c) := 3*(1 - ε_por)/(2*ln(10))*(z/d_c)
## Force ratios
Π_Br(V_a, d_c, d_p) := k_b*Τ/(3*π*μ*d_p*V_a*d_c)  # Brownian motion transport
Π_g(V_a, d_p, ρ_p) := d_p^2*(ρ_p - ρ_w)*g/(18*μ*V_a)  # Gravitational transport
Reynolds := V_a*d_c/ν = 1.01124
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## Porosity effects
γ(ε) := (1 - ε)^(1/3)
A_s(ε) := 2*(1 - γ(ε)^5)/(2 - 3*γ(ε) + 3*γ(ε)^5 - 2*γ(ε)^6)
## Transport due to Brownian motion, gravity, and interception
η_Br(V_a, d_c, d_p) := 3/4*A_s(ε_por)^(1/3)*Π_R(d_c, d_p)^(-1/6)*Π_Br(V_a, d_c, d_p)^(2/3)  # Brownian motion
η_R(d_c, d_p) := 1/21.5*A_s(ε_por)*Π_R(d_c, d_p)^1.425  # Interception
η_g(V_a, d_p, ρ_p) := 0.31*Π_g(V_a, d_p, ρ_p)  # Gravity
η(V_a, d_c, d_p, ρ_p) := η_Br(V_a, d_c, d_p) + η_R(d_c, d_p) + η_g(V_a, d_p, ρ_p)  # Total
## Particle removal
pC_Br(V_a, z, d_c, d_p, α) := Π_z(z, d_c)*α*η_Br(V_a, d_c, d_p)  # Brownian motion
D_Clay = 4 μm
D_Fractal = 2.3
Τ = 293 K
EN_Chem := 1
C_Al := 2*mg/L
C_Clay := 100*NTU
pC_R(z, d_c, d_p, α) := Π_z(z, d_c)*α*η_R(d_c, d_p)  # Interception
pC_g(V_a, z, d_c, d_p, ρ_p, α) := Π_z(z, d_c)*α*η_g(V_a, d_p, ρ_p)  # Gravity
ρ_Floc(C_Al, C_Clay, D_Fractal, D_Clay, D_Clay, EN_Chem, Τ) = 2536.54 kg/m^3
z = 0.2 m
pC_Filter(V_a, z, d_c, d_p, ρ_p, α) := Π_z(z, d_c)*α*η(V_a, d_c, d_p, ρ_p)  # Total
V_t(C_Alum, C_Clay, D_Fractal, d_0, d)
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# Suppose that water drops 0.4 m into the filter entrance tank and the jet is 1 cm wide where it hits the water surface
H_FreeFall := 0.4 m
Π_Jet := 0.4
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V_Jet := sqrt(2*g*H_FreeFall) = 2.80095 m/s
W_Jet := 1 cm
ε_Jet := (Π_Jet*V_Jet)^3/W_Jet = 140.636 W/kg
d_maxf(ε_Jet) =  # error: This variable is undefined.
