# Flocculator Functions
Q_Plant := 20*L/s
# [reference: ExpertInputs.xmcd]
# [reference: MathFunctions.xmcd]
# [reference: PipeDatabase.xmcd]
# [reference: MaterialsDatabase.xmcd]
# [reference: FluidsFunctions.xmcd]
# [reference: SedTankFunctions.xmcd]
# CFD Stuff
CFD_Constant := 2
Pi_VCBaffle := 1/(sqrt(K_FlocBaffle) + 1) = 0.387426
fQ_Transition(ED_Floc) := ED_Floc^(1/3)*W_HumanMin*(1.6 m)^(4/3)*Pi_Jet^3/(K_FlocBaffle^(1/3)*Pi_VCBaffle^2)
Pi_JSGraph := 2 .. 40
α_ψ(Pi_JS) := min((4*Pi_Jet^3/(Pi_VCBaffle^2*K_FlocBaffle))^(1/6), (4/Pi_JS)^(1/6))
α_ε(Pi_JS) := max(2, Pi_Jet^3/Pi_VenaContractaOrifice^4*2/K_FlocBaffle*Pi_JS)
ψ_P(J, S) := α_ψ(J/S)*J^(2/3)*(K_FlocBaffle/2)^(1/3)
# Preliminary Calculations
S_FlocBaffleMin := W_HumanMin = 0.45 m
J(P, S) := P*S
J_Min := J(Pi_JSOptimal, S_FlocBaffleMin) = 1.35 m
H_MaxHorizontal(Q, S, Pi_JS, ED, J) := Q/(S*(J*2*ED/(K_FlocBaffle*α_ε(Pi_JS)))^(1/3))
fHW_FlocEndEst(Q_Plant, ED_Floc) :=
    fHW_Sed(Q_Plant) if H_FlocOption == 0
    H_MaxHorizontal(Q_Plant, S_FlocBaffleMin, Pi_JSOptimal, ED_Floc, J_Min) if H_FlocOption == -1
    H_FlocOption*m if H_FlocOption > 0
N_FlocSpacesFH(L, T, S) := (Floor((L + T)/(S + T) + 1, 2) - 1)
SofN_FlocBaffleF(L, T, N_Spaces) := (L + T)/N_Spaces - T
S_FlocBaffleNonIterative(Q, P, Pi_JS, ED) := (Q/P)^(3/4)*(1/Pi_JS)^(1/4)*(K_FlocBaffle*α_ε(Pi_JS)/(2*ED))^(1/4)
fS_FlocBaffleCalcH(Q_Plant) := SofN_FlocBaffleF(fL_Sed(Q_Plant), T_FlocBaffleRigidH, N_FlocSpacesFH(fL_Sed(Q_Plant), T_FlocBaffleRigidH, S_FlocBaffleNonIterative(Q_Plant, fHW_FlocEndEst(Q_Plant, ED_Floc), Pi_JSOptimal, ED_Floc)))
fHW_FlocEnd(Q_Plant) :=
    H_MaxHorizontal(Q_Plant, fS_FlocBaffleCalcH(Q_Plant), Pi_JSOptimal, ED_Floc, J(Pi_JSOptimal, fS_FlocBaffleCalcH(Q_Plant))) if H_FlocOption == -1
    fHW_FlocEndEst(Q_Plant, ED_Floc) otherwise
Q_MinHorizontal(P, S, Pi_JS, ED, J) := P*S*(J*2*ED/(K_FlocBaffle*α_ε(Pi_JS)))^(1/3)
fEN_FlocHoriz(Q_Plant) :=
    EN_FlocHoriz ← 1 if Q_Plant ≥ Q_MinHorizontal(fHW_FlocEnd(Q_Plant), S_FlocBaffleMin, Pi_JSOptimal, ED_Floc, J_Min) and H_FlocOption > -1
    EN_FlocHoriz ← 1 if H_FlocOption == -1
    EN_FlocHoriz ← 0 otherwise
S_FlocBaffleIterative(Q, W, J, S, ED) := (K_FlocBaffle*α_ε(J/S)/(2*J*ED))^(1/3)*Q/W
W_FlocChannelV(Q, J, S, ED) := (K_FlocBaffle*α_ε(J/S)/(2*J*ED))^(1/3)*Q/S
fW_FlocChannelMinRigidBaffleV(Q_Plant) := W_FlocChannelV(Q_Plant, fHW_FlocEnd(Q_Plant), S_FlocBaffleMin, ED_Floc)
W_FlocChannelPlasticBaffleV := max(0.5*W_Plastic, S_FlocBaffleMin)
fT_FlocBaffle(Q_Plant) :=
    T_FlocBaffleRigidH if fEN_FlocHoriz(Q_Plant) == 1
    T_SedPlate otherwise
T_FlocChannelWall :=
    T_FlocBaffleRigidV if Q_Plant ≤ Q_PlantMaxLF
    T_FlocChannelWallMidFlow otherwise
    = 0.15 m
fEN_FlocBaffle(Q_Plant) :=
    EN_FlocBaffle ← 0 if fEN_FlocHoriz(Q_Plant) == 1
    EN_FlocBaffle ← 1 otherwise
fS_FlocPortGap(Q_Plant) :=
    T_ConcreteMin if (fEN_FlocBaffle(Q_Plant) == 0) and (fEN_FlocHoriz(Q_Plant) == 0)
    S_FlocBaffleSetBackPlastic if (fEN_FlocBaffle(Q_Plant) == 1) and (fEN_FlocHoriz(Q_Plant) == 0)
    (0 m) otherwise
# Cost Functions for Vertical Flocculators
T_Slab := 25 cm
Cost_UnitConcrete := 150*USD/yd^3 = 196.193 base_currency/m^3
Cost_UnitBaffle := 360/19*USD/(12 ft) = 5.18027 base_currency/m
Cost_UnitSlab := (575 + 700)/19*USD/m^2
Cost_UnitWall := 950/19*USD/m^2 = 50 base_currency/m^2
fS_BaffleOverlapMax(Q_Plant) := (-2*ConRadius(ND_FlocModulesLarge) + fHW_FlocEnd(Q_Plant))/(2*Pi_FlocBaffleMin)
fW_FlocChannelMin(Q_Plant) := max(W_HumanMin, (K_FlocBaffle/(ED_Floc*fHW_FlocEnd(Q_Plant)))^(1/3)*Q_Plant/fS_BaffleOverlapMax(Q_Plant))
W_FlocChannelMax := W_SedPlate
W_FlocChannelVF(ED_FlocBod, Q_Plant, L_FlocChannel, T_FlocBaffle, H_Floc, Pi_FlocBaffleMin) :=
    for i ∈ 0 .. max(W_FlocChannelMax - fW_FlocChannelMin(Q_Plant), 0)/cm
        W_FlocArray[i] ← fW_FlocChannelMin(Q_Plant) + i*cm
        Cost_FlocArray[i] ← Cost_FlocVF(ED_FlocBod, Q_Plant, W_FlocArray[i], L_FlocChannel, T_FlocBaffle, H_Floc, Pi_FlocBaffleMin)
    MinCost ← min(Cost_FlocArray)
    Index ← match(min(Cost_FlocArray), Cost_FlocArray)
    W_FlocBest ← W_FlocArray[match(min(Cost_FlocArray), Cost_FlocArray)[0]]
    return W_FlocBest  # error: This variable is undefined.
