# Flocculation Function
# The Flocculator program should be calculating the spacing between baffles for all sections. the number of baffles in each section and the placement of the baffles throughout the flocculator.
# References:
# [reference: MasterProgram.xmcd]
# Floc Calculations:
HW_FlocEnd := HW_Sed = 1.45134 m
S_FlocBaffleEnd := 1/2*HW_FlocEnd = 0.72567 m
W_FlocChannel := max(2*Q_Plant/HW_FlocEnd*(K_FlocBaffle180/(2*Pi_Epsilon*HW_FlocEnd*ED_Floc[last(ED_Floc)]))^(1/3), W_FlocChannelMin) = 90.2976 cm
CP_FlocBaffle := (K_FlocBaffle180*(Pi_Epsilon*HW_FlocEnd)^2/2)^(1/3) = 1.43783 m^(2/3)  # Collision potential per baffle
# We can tweak these Pi terms to get the baffle distribution that we like and the head loss that we like
# The Pi terms determine at what fraction of the total collision potential does the energy dissipation rate start to drop and at what energy dissipation rate does it level off again.
ED_Function(n_Baffles) :=
    Pi ← [0.4; 0.7]
    m ← (ED_Floc[0] - ED_Floc[1])/((Pi[0] - Pi[1])*CP_Floc/CP_FlocBaffle)
    b ← ED_Floc[0] - m*Pi[0]*CP_Floc/CP_FlocBaffle
    ED_Function ← ED_Floc[0] if n_Baffles ≤ Pi[0]*CP_Floc/CP_FlocBaffle
    ED_Function ← m*n_Baffles + b if n_Baffles > Pi[0]*CP_Floc/CP_FlocBaffle and n_Baffles ≤ Pi[1]*CP_Floc/CP_FlocBaffle
    ED_Function ← ED_Floc[1] if n_Baffles > Pi[1]*CP_Floc/CP_FlocBaffle
    return ED_Function
n_BafflesMin := ceil(CP_Floc/CP_FlocBaffle)
ED_Floc = [20; 2] mW/kg
n_Baffles := (0, 1 .. n_BafflesMin)
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Spacing_FlocBaffle(n_Baffles) := Q_Plant/W_FlocChannel*(K_FlocBaffle180/(2*Pi_Epsilon*HW_FlocEnd*ED_Function(n_Baffles)))^(1/3) + T_FlocBaffle
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# We sum the area under the curve to get the cumulative length of the flocculator as a function of the number of baffles
CumulativeChannelLength[n_Baffles] := sum(Spacing_FlocBaffle(i), i = 0 .. n_Baffles)
CumulativeChannels := CumulativeChannelLength/L_Sed
CumulativeBaffles[n_Baffles] := n_Baffles  # makes an array from a range variable
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# Switch the axis and divide by the channel length to show the cumulative number of baffles as a function of the number of channels
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# Use linear interpolation to find the cumulative number of baffles as a function of the channel number
N_FlocChannels := ceil(linterp(CumulativeBaffles, CumulativeChannels, n_BafflesMin)) = 4  # Use this function to get the total number of channels required.
Channels := 0 .. N_FlocChannels - 1  # range variable for the floc channels
# take cumulative number of baffles in a channel minus the cumulative number of baffles in the previous channel to get the number of baffles in a channel. The factors of 2 ensure that we get an even number of baffles. Subtract 1 to get the number of baffles required to create the required number of energy dissipation zones.
BafflesPerChannel(ChannelNumber) := 2*round((linterp(CumulativeChannels, CumulativeBaffles, ChannelNumber) - linterp(CumulativeChannels, CumulativeBaffles, ChannelNumber - 1))/2) - 1
N_FlocChannelBaffles[Channels] := BafflesPerChannel(Channels + 1)  # Define an array with the number of baffles in each channel
N_FlocChannelBaffles = [27; 23; 13; 13]  # This is the number of baffles (not the number of spaces)
N_FlocBaffles := sum(N_FlocChannelBaffles) = 76
# Now we need to calculate the following for each channel
# baffle center to center distance
# baffle separation distance
# head loss in each channel
# Divide the total available space evenly. First subtract the space occupied by the baffles and then divide by the number of spaces.
S_FlocBaffle := (L_Sed - N_FlocChannelBaffles*T_FlocBaffle)/(N_FlocChannelBaffles + 1) = [0.334099; 0.396449; 0.708199; 0.708199] m
B_FlocBaffle := S_FlocBaffle + T_FlocBaffle  # center to center distance
HL_FlocBaffle := h_erect(Q_Plant, W_FlocChannel, S_FlocBaffle, K_FlocBaffle180) = [10.98; 7.7979; 2.44367; 2.44367] mm  # head loss per baffle in each channel
# total head loss per channel
HL_FlocChannels := vectorize(HL_FlocBaffle*(N_FlocChannelBaffles + 1)) = [30.7439; 18.715; 3.42114; 3.42114] cm
HL_Floc := HL_FlocBaffle*(N_FlocChannelBaffles + 1) = 56.3012 cm  # total head loss in the flocculator
HW_FlocStart := HW_FlocEnd + HL_Floc = 2.01435 m
# Here we are assuming that the entire flocculator has extra tall walls. BUt that isn't necessary. Only the first two channels need to have tall walls. This needs to be fixed!
H_Floc := HW_FlocStart + H_PlantFreeboard = 2.11435 m
L_FlocTank := N_FlocChannels*L_Sed = 41.7391 m  # Total length of floc tanks
Ti_Floc := HW_FlocEnd*L_FlocTank*W_FlocChannel/Q_Plant = 13.0238 min
W_FlocPortEst := S_FlocBaffle = [33.4099; 39.6449; 70.8199; 70.8199] cm
# The width of the floc port that connects channels will be based on the baffle spacing in that channel
# This is the actual energy dissipation rate in each channel
ED_FlocChannel := K_FlocBaffle180/(2*HW_FlocEnd*Pi_Epsilon)*(Q_Plant/(S_FlocBaffle*W_FlocChannel))^3 = [20.4937; 12.2655; 2.1517; 2.1517] mW/kg
H_FlocPortEst := W_FlocChannel = 0.902976 m
# This keeps the energy dissipation rate through the ports the same as through the baffles since the dimension of the port is actually exactly the same as the dimension through the baffles
A_FlocPort := W_FlocPortEst*H_FlocPortEst
W_FlocPort := W_FlocPortEst - S_FlocChannel
H_FlocPort := A_FlocPort/W_FlocPort
W_GritWeir := 15 cm  # This length needs to be defined by the floating floc team.
# Now we need to assign positions, lengths and elevations to floc baffles
L_FlocBaffleLower := HW_FlocEnd - S_FlocBaffle*Pi_FlocBaffle = [1.11724; 1.05489; 0.743141; 0.743141] m
# H.Floc should be an array with an element for each channel
L_FlocBaffleUpper := H_Floc - S_FlocBaffle*Pi_FlocBaffle = [1.78025; 1.7179; 1.40615; 1.40615] m
X_FlocBaffles :=
    for channel ∈ Channels
        for i ∈ 0 .. N_FlocChannelBaffles[channel] - 1
            x[i, channel] ← S_FlocBaffle[channel] + B_FlocBaffle[channel]*i
    return x
# X array is the distance from the inside of the wall of the floc tank (on the side of the plant that has the inlet channel to the sed tank) to the face of the baffle closest to that end of the floc tank
X_FlocBaffles = [
    0.334099, 0.396449, 0.708199, 0.708199;
    0.708199, 0.832899, 1.4564, 1.4564;
    1.0823, 1.26935, 2.2046, 2.2046;
    1.4564, 1.7058, 2.9528, 2.9528;
    1.8305, 2.14225, 3.70099, 3.70099;
    2.2046, 2.5787, 4.44919, 4.44919;
    2.5787, 3.01514, 5.19739, 5.19739;
    2.9528, 3.45159, 5.94559, 5.94559;
    3.32689, 3.88804, 6.69379, 6.69379;
    3.70099, 4.32449, 7.44199, 7.44199;
    4.07509, 4.76094, 8.19019, 8.19019;
    4.44919, 5.19739, 8.93839, 8.93839;
    4.82329, 5.63384, 9.68658, 9.68658;
    5.19739, 6.07029, 0, 0;
    5.57149, 6.50674, 0, 0;
    5.94559, 6.94319, 0, 0;
    6.31969, 7.37964, 0, 0;
    6.69379, 7.81609, 0, 0;
    7.06789, 8.25254, 0, 0;
    7.44199, 8.68899, 0, 0;
    7.81609, 9.12543, 0, 0;
    8.19019, 9.56188, 0, 0;
    8.56429, 9.99833, 0, 0;
    8.93839, 0, 0, 0;
    9.31248, 0, 0, 0;
    9.68658, 0, 0, 0;
    10.0607, 0, 0, 0
] m
Z_FlocBaffles :=
    for channel ∈ Channels
        for i ∈ 0 .. N_FlocChannelBaffles[channel] - 1
            z[i, channel] ← mod(i, 2)*S_FlocBaffle[channel]
    return z
# Z array is the elevation of the bottom of the baffle
# Z.FlocBaffles was changed so that the order was down-up instead of up-down.
Z_FlocBaffles = [
    0, 0, 0, 0;
    0.334099, 0.396449, 0.708199, 0.708199;
    0, 0, 0, 0;
    0.334099, 0.396449, 0.708199, 0.708199;
    0, 0, 0, 0;
    0.334099, 0.396449, 0.708199, 0.708199;
    0, 0, 0, 0;
    0.334099, 0.396449, 0.708199, 0.708199;
    0, 0, 0, 0;
    0.334099, 0.396449, 0.708199, 0.708199;
    0, 0, 0, 0;
    0.334099, 0.396449, 0.708199, 0.708199;
    0, 0, 0, 0;
    0.334099, 0.396449, 0, 0;
    0, 0, 0, 0;
    0.334099, 0.396449, 0, 0;
    0, 0, 0, 0;
    0.334099, 0.396449, 0, 0;
    0, 0, 0, 0;
    0.334099, 0.396449, 0, 0;
    0, 0, 0, 0;
    0.334099, 0.396449, 0, 0;
    0, 0, 0, 0;
    0.334099, 0, 0, 0;
    0, 0, 0, 0;
    0.334099, 0, 0, 0;
    0, 0, 0, 0
] m
L_FlocBaffles :=
    for channel ∈ Channels
        for i ∈ 0 .. N_FlocChannelBaffles[channel] - 1
            l[i, channel] ← L_FlocBaffleLower[channel] if mod(i, 2) == 1
            l[i, channel] ← L_FlocBaffleUpper[channel] otherwise
    return l
# L array is the total height (length) of the baffle
L_FlocBaffles = [
    1.78025, 1.7179, 1.40615, 1.40615;
    1.11724, 1.05489, 0.743141, 0.743141;
    1.78025, 1.7179, 1.40615, 1.40615;
    1.11724, 1.05489, 0.743141, 0.743141;
    1.78025, 1.7179, 1.40615, 1.40615;
    1.11724, 1.05489, 0.743141, 0.743141;
    1.78025, 1.7179, 1.40615, 1.40615;
    1.11724, 1.05489, 0.743141, 0.743141;
    1.78025, 1.7179, 1.40615, 1.40615;
    1.11724, 1.05489, 0.743141, 0.743141;
    1.78025, 1.7179, 1.40615, 1.40615;
    1.11724, 1.05489, 0.743141, 0.743141;
    1.78025, 1.7179, 1.40615, 1.40615;
    1.11724, 1.05489, 0, 0;
    1.78025, 1.7179, 0, 0;
    1.11724, 1.05489, 0, 0;
    1.78025, 1.7179, 0, 0;
    1.11724, 1.05489, 0, 0;
    1.78025, 1.7179, 0, 0;
    1.11724, 1.05489, 0, 0;
    1.78025, 1.7179, 0, 0;
    1.11724, 1.05489, 0, 0;
    1.78025, 1.7179, 0, 0;
    1.11724, 0, 0, 0;
    1.78025, 0, 0, 0;
    1.11724, 0, 0, 0;
    1.78025, 0, 0, 0
] m
