# [reference: MasterProgram.xmcd]
# Flocculation Function
# The Flocculator program should be calculating the spacing between baffles for all sections. the number of baffles in each section and the placement of the baffles throughout the flocculator.
# References:
# Floc Calculations:
HW_FlocEnd := HW_Sed = 1.75254 m
S_FlocBaffleEnd := 1/2*HW_FlocEnd = 0.876272 m
W_FlocChannel := max(2*Q_Plant/HW_FlocEnd*(K_FlocBaffle180/(2*Pi_Epsilon*HW_FlocEnd*ED_Floc[last(ED_Floc)]))^(1/3), W_FlocChannelMin) = 85.7705 cm
Pi_FlocBaffleCP := (K_FlocBaffle180*(Pi_Epsilon*HW_FlocEnd)^2/2)^(1/3) = 1.63046 m^(2/3)  # Collision potential per baffle
# We can tweak these Pi terms to get the baffle distribution that we like and the head loss that we like
# The Pi terms determine at what fraction of the total collision potential does the energy dissipation rate start to drop and at what energy dissipation rate does it level off again.
ED_Function(n_Baffles) :=
    Pi ← [0.4; 0.7]
    m ← (ED_Floc[0] - ED_Floc[1])/((Pi[0] - Pi[1])*CP_Floc/Pi_FlocBaffleCP)
    b ← ED_Floc[0] - m*Pi[0]*CP_Floc/Pi_FlocBaffleCP
    ED_Function ← ED_Floc[0] if n_Baffles ≤ Pi[0]*CP_Floc/Pi_FlocBaffleCP
    ED_Function ← m*n_Baffles + b if n_Baffles > Pi[0]*CP_Floc/Pi_FlocBaffleCP and n_Baffles ≤ Pi[1]*CP_Floc/Pi_FlocBaffleCP
    ED_Function ← ED_Floc[1] if n_Baffles > Pi[1]*CP_Floc/Pi_FlocBaffleCP
    return ED_Function
n_BafflesMin := ceil(CP_Floc/Pi_FlocBaffleCP)
ED_Floc = [6.4; 0.4] mW/kg
n_Baffles := (0, 1 .. n_BafflesMin)
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Spacing_FlocBaffle(n_Baffles) := Q_Plant/W_FlocChannel*(K_FlocBaffle180/(2*Pi_Epsilon*HW_FlocEnd*ED_Function(n_Baffles)))^(1/3) + T_FlocBaffle
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# We sum the area under the curve to get the cumulative length of the flocculator as a function of the number of baffles
CumulativeChannelLength[n_Baffles] := sum(Spacing_FlocBaffle(i), i = 0 .. n_Baffles)
CumulativeChannels := CumulativeChannelLength/L_Sed
CumulativeBaffles[n_Baffles] := n_Baffles  # makes an array from a range variable
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# Switch the axis and divide by the channel length to show the cumulative number of baffles as a function of the number of channels
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# Use linear interpolation to find the cumulative number of baffles as a function of the channel number
N_FlocChannels := ceil(linterp(CumulativeBaffles, CumulativeChannels, n_BafflesMin)) = 5  # Use this function to get the total number of channels required.
Channels := 0 .. N_FlocChannels - 1  # range variable for the floc channels
# take cumulative number of baffles in a channel minus the cumulative number of baffles in the previous channel to get the number of baffles in a channel. The factors of 2 ensure that we get an even number of baffles. Subtract 1 to get the number of baffles required to create the required number of energy dissipation zones.
BafflesPerChannel(ChannelNumber) := 2*round((linterp(CumulativeChannels, CumulativeBaffles, ChannelNumber) - linterp(CumulativeChannels, CumulativeBaffles, ChannelNumber - 1))/2) - 1
N_FlocChannelBaffles[Channels] := BafflesPerChannel(Channels + 1)  # Define an array with the number of baffles in each channel
N_FlocChannelBaffles = [23; 19; 9; 9; 9]  # This is the number of baffles (not the number of spaces)
N_FlocBaffles := sum(N_FlocChannelBaffles) = 69
# Now we need to calculate the following for each channel
# baffle center to center distance
# baffle separation distance
# head loss in each channel
# Divide the total available space evenly. First subtract the space occupied by the baffles and then divide by the number of spaces.
S_FlocBaffle := (L_Sed - N_FlocChannelBaffles*T_FlocBaffle)/(N_FlocChannelBaffles + 1) = [0.358676; 0.438411; 0.916822; 0.916822; 0.916822] m
B_FlocBaffle := S_FlocBaffle + T_FlocBaffle  # center to center distance
HL_FlocBaffle := h_erect(Q_Plant, W_FlocChannel, S_FlocBaffle, K_FlocBaffle180) = [5.38727; 3.60587; 0.824524; 0.824524; 0.824524] mm
# head loss per baffle in each channel
# total head loss per channel
HL_FlocChannels := vectorize(HL_FlocBaffle*(N_FlocChannelBaffles + 1)) = [12.9295; 7.21174; 0.824524; 0.824524; 0.824524] cm
HL_Floc := HL_FlocBaffle*(N_FlocChannelBaffles + 1) = 22.6148 cm  # total head loss in the flocculator
HW_FlocStart := HW_FlocEnd + HL_Floc = 1.97869 m
# Here we are assuming that the entire flocculator has extra tall walls. BUt that isn't necessary. Only the first two channels need to have tall walls. This needs to be fixed!
H_Floc := HW_FlocStart + H_PlantFreeboard = 2.07869 m
L_FlocTank := N_FlocChannels*L_Sed = 47.6411 m  # Total length of floc tanks
Ti_Floc := HW_FlocEnd*L_FlocTank*W_FlocChannel/Q_Plant = 23.8708 min
W_FlocPortEst := S_FlocBaffle = [35.8676; 43.8411; 91.6822; 91.6822; 91.6822] cm
# The width of the floc port that connects channels will be based on the baffle spacing in that channel
# This is the actual energy dissipation rate in each channel
ED_FlocChannel := K_FlocBaffle180/(2*HW_FlocEnd*Pi_Epsilon)*(Q_Plant/(S_FlocBaffle*W_FlocChannel))^3 = [5.83272; 3.19399; 0.349239; 0.349239; 0.349239] mW/kg
H_FlocPortEst := W_FlocChannel = 0.857705 m
# This keeps the energy dissipation rate through the ports the same as through the baffles since the dimension of the port is actually exactly the same as the dimension through the baffles
A_FlocPort := W_FlocPortEst*H_FlocPortEst
W_FlocPort := W_FlocPortEst - S_FlocChannel
H_FlocPort := A_FlocPort/W_FlocPort
W_GritWeir := 15 cm  # This length needs to be defined by the floating floc team.
# Now we need to assign positions, lengths and elevations to floc baffles
L_FlocBaffleLower := HW_FlocEnd - S_FlocBaffle*Pi_FlocBaffle = [1.39387; 1.31413; 0.835723; 0.835723; 0.835723] m
# H.Floc should be an array with an element for each channel
L_FlocBaffleUpper := H_Floc - S_FlocBaffle*Pi_FlocBaffle = [1.72002; 1.64028; 1.16187; 1.16187; 1.16187] m
X_FlocBaffles :=
    for channel ∈ Channels
        for i ∈ 0 .. N_FlocChannelBaffles[channel] - 1
            x[i, channel] ← S_FlocBaffle[channel] + B_FlocBaffle[channel]*i
    return x
# X array is the distance from the inside of the wall of the floc tank (on the side of the plant that has the inlet channel to the sed tank) to the face of the baffle closest to that end of the floc tank
X_FlocBaffles = [
    0.358676, 0.438411, 0.916822, 0.916822, 0.916822;
    0.757352, 0.916822, 1.87364, 1.87364, 1.87364;
    1.15603, 1.39523, 2.83047, 2.83047, 2.83047;
    1.5547, 1.87364, 3.78729, 3.78729, 3.78729;
    1.95338, 2.35206, 4.74411, 4.74411, 4.74411;
    2.35206, 2.83047, 5.70093, 5.70093, 5.70093;
    2.75073, 3.30888, 6.65775, 6.65775, 6.65775;
    3.14941, 3.78729, 7.61458, 7.61458, 7.61458;
    3.54808, 4.2657, 8.5714, 8.5714, 8.5714;
    3.94676, 4.74411, 0, 0, 0;
    4.34543, 5.22252, 0, 0, 0;
    4.74411, 5.70093, 0, 0, 0;
    5.14279, 6.17934, 0, 0, 0;
    5.54146, 6.65775, 0, 0, 0;
    5.94014, 7.13617, 0, 0, 0;
    6.33881, 7.61458, 0, 0, 0;
    6.73749, 8.09299, 0, 0, 0;
    7.13617, 8.5714, 0, 0, 0;
    7.53484, 9.04981, 0, 0, 0;
    7.93352, 0, 0, 0, 0;
    8.33219, 0, 0, 0, 0;
    8.73087, 0, 0, 0, 0;
    9.12954, 0, 0, 0, 0
] m
Z_FlocBaffles :=
    for channel ∈ Channels
        for i ∈ 0 .. N_FlocChannelBaffles[channel] - 1
            z[i, channel] ← mod(i + 1, 2)*S_FlocBaffle[channel]
    return z
# Z array is the elevation of the bottom of the baffle
Z_FlocBaffles = [
    0.358676, 0.438411, 0.916822, 0.916822, 0.916822;
    0, 0, 0, 0, 0;
    0.358676, 0.438411, 0.916822, 0.916822, 0.916822;
    0, 0, 0, 0, 0;
    0.358676, 0.438411, 0.916822, 0.916822, 0.916822;
    0, 0, 0, 0, 0;
    0.358676, 0.438411, 0.916822, 0.916822, 0.916822;
    0, 0, 0, 0, 0;
    0.358676, 0.438411, 0.916822, 0.916822, 0.916822;
    0, 0, 0, 0, 0;
    0.358676, 0.438411, 0, 0, 0;
    0, 0, 0, 0, 0;
    0.358676, 0.438411, 0, 0, 0;
    0, 0, 0, 0, 0;
    0.358676, 0.438411, 0, 0, 0;
    0, 0, 0, 0, 0;
    0.358676, 0.438411, 0, 0, 0;
    0, 0, 0, 0, 0;
    0.358676, 0.438411, 0, 0, 0;
    0, 0, 0, 0, 0;
    0.358676, 0, 0, 0, 0;
    0, 0, 0, 0, 0;
    0.358676, 0, 0, 0, 0
] m
L_FlocBaffles :=
    for channel ∈ Channels
        for i ∈ 0 .. N_FlocChannelBaffles[channel] - 1
            l[i, channel] ← L_FlocBaffleLower[channel] if mod(i, 2) == 1
            l[i, channel] ← L_FlocBaffleUpper[channel] otherwise
    return l
# L array is the total height (length) of the baffle
L_FlocBaffles = [
    1.72002, 1.64028, 1.16187, 1.16187, 1.16187;
    1.39387, 1.31413, 0.835723, 0.835723, 0.835723;
    1.72002, 1.64028, 1.16187, 1.16187, 1.16187;
    1.39387, 1.31413, 0.835723, 0.835723, 0.835723;
    1.72002, 1.64028, 1.16187, 1.16187, 1.16187;
    1.39387, 1.31413, 0.835723, 0.835723, 0.835723;
    1.72002, 1.64028, 1.16187, 1.16187, 1.16187;
    1.39387, 1.31413, 0.835723, 0.835723, 0.835723;
    1.72002, 1.64028, 1.16187, 1.16187, 1.16187;
    1.39387, 1.31413, 0, 0, 0;
    1.72002, 1.64028, 0, 0, 0;
    1.39387, 1.31413, 0, 0, 0;
    1.72002, 1.64028, 0, 0, 0;
    1.39387, 1.31413, 0, 0, 0;
    1.72002, 1.64028, 0, 0, 0;
    1.39387, 1.31413, 0, 0, 0;
    1.72002, 1.64028, 0, 0, 0;
    1.39387, 1.31413, 0, 0, 0;
    1.72002, 1.64028, 0, 0, 0;
    1.39387, 0, 0, 0, 0;
    1.72002, 0, 0, 0, 0;
    1.39387, 0, 0, 0, 0;
    1.72002, 0, 0, 0, 0
] m
