# Flocculator Design
# The fraction of the maximum collision potential that could be achieved if the energy dissipation rate was uniformly distributed. Or, if this fraction of the available energy were uniformly distributed the collision potential would be the same as what it is given the nonuniformity in the energy dissipation rate distribution.
# ratio of water depth to baffle spacing
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Pi_HBdat := [2; 3; 4; 5; 8; 10; 15; 20; 40]  # h/b*values
# all values from Yi, Wenqi, 2009
α_ψdat := [0.65; 0.86; 0.87; 0.85; 0.71; 0.64; 0.53; 0.46; 0.33]
# The maximum energy dissipation rate is loosely defined as the the maximum energy dissipation rate that is seen by a significant fraction of the flow. We don't have a good way to characterize this parameter analytically yet, but I estimated this using the color contours of the energy dissipation rate (data from Yi, Wenqi, 2009)
# Minor loss coefficient. This many equivalents of the kinetic energy are lost through one baffle.
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K_Pdat := [9.60; 7.17; 4.32; 3.42; 3.15; 3.13; 3.22; 3.39; 3.84]
α_εdat := [1.875617391; 1.808368729; 1.776938668; 1.927164849; 3.356408643; 4.221784408; 6.332676611; 7.793864103; 13.75322341]
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α_ψ(Pi_HB) := linterp(Pi_HBdat, α_ψdat, Pi_HB)  # These functions using linear interpolation to create functional relationships
α_ε(Pi_HB) := linterp(Pi_HBdat, α_εdat, Pi_HB)
K_P(Pi_HB) := linterp(Pi_HBdat, K_Pdat, Pi_HB)
# The new flocculation model more carefully distinguishes between maximum and average energydissipation rates. The flocculators should be designed based on a maximum allowed energy dissipation rate to ensure that suboptimal geometry (high h/b ratios) doesn't result in excessively high energy dissipation rates that could break flocs. However, since this model is now incorporating the concept of a maximum energy dissipation rate the energy dissipation rate guidelines need to be increased to account for the distinction between average and maximum.
# Because we are now using the concept of a maximum energy dissipation rate it should be possible to directly incorporate results from laminar flow flocculators to produce guidelines on the maximum allowable energy dissipation rates. One caveat is that the turbulent flow energy dissipation rates are time averaged and it is not yet clear what the expected temporal variability is for turbulent flow energy dissipation rates.
# Based on a range of G values up to 200/s used in designs cited by Schulz and Okun, 1984 (page 114).
G_oldway := [200; 50]*1/s
ED_FlocEst := G_oldway^2*(α_εdat[3]*1*mm^2/s) = [77.0866; 4.81791] mW/kg
ED_Floc := [20; 5]*mW/kg  # Increasing the maximum value here doesn't have a huge impact on collision potential, but it does strongly influence head loss.
# Floc Calculations:
Q_Plant := 100*gal/min
HW_Sed := 2 m
# Dividing the tank in two with a 15 cm thick divider would leave two chambers 13" wide the length of the tank.
#
# So after tomorrow we should have all the information I need to whip up a draft budget to get financing searching and negotiations rolling except a redesign for the floc tank baffles. Could the team/you at Cornell take the floc tank dimensions and come up with a number of baffles and baffle spacing? From there, I would budget it and include it with the rest of the proposal.  The tank dimensions currently are: 0.84 m wide, 3 m long, and 2.23 m bottom to the top of the wall, and 1.94 m from the bottom of the tank to the elevation of the sed tank outlets.
HW_FlocEnd := HW_Sed = 2 m
# Here I am assuming that half of the tank has a higher energy dissipation rate and the other half will have the lower energy dissipation rate. If you want to see the effect on the design of adding a central divider you can change L.Sed to 3 m and change W.FlocChannel to 13 in.
L_Sed := 1.5 m
W_FlocChannel := 32 in
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BaffleSpaceFunction(Q, W, H, Pi_HB, ED) := (K_P(Pi_HB)*α_ε(Pi_HB)/(2*H*ED))^(1/3)*Q/W
S_FlocBaffleF(ED, W_FlocChannel, Q_Plant, HW_Sed) :=
    S ← BaffleSpaceFunction(Q_Plant, W_FlocChannel, HW_Sed, 4, ED)
    error ← 1
    while error > 0.001
        S_new ← BaffleSpaceFunction(Q_Plant, W_FlocChannel, HW_Sed, HW_Sed/S, ED)
        error ← |S - S_new|/(S + S_new)
        S ← S_new
    return S
i := 0 .. 1  # assume two baffle spacings
S_FlocBaffle[i] := S_FlocBaffleF(ED_Floc[i], W_FlocChannel, Q_Plant, HW_Sed)
S_FlocBaffle = [6.24656; 8.83888] cm
N_FlocBaffle := floor(L_Sed/S_FlocBaffle) = [24; 16]  # Number of spaces between baffles in each section (total baffles is one less than this total)
# Now we calculate collision potential provided by each baffle
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ψ_P[i] := (HW_Sed^2*α_ψ(HW_Sed/S_FlocBaffle[i])*K_P(HW_Sed/S_FlocBaffle[i])/2)^(1/3)
ψ_P = [1.40874; 1.45107] m^(2/3)
# Add up all of the collisision potential for all of the baffles
ψ_F := ψ_P*N_FlocBaffle = 57.0269 m^(2/3)
# We have oscillated a lot on this design value. We are currently using a value of 110 m^2/3, but that is probably a bit conservative. I think it is possible that we under designed Ojojona and that is why I want to push it as hard as possible to see if we can get improved performance.
# Now calculate the head loss per baffle and then the head loss for the entire channel
HL_Baffle := K_P(HW_Sed/S_FlocBaffle)*Q_Plant^2/(2*g*(S_FlocBaffle*W_FlocChannel)^2) = [0.288172; 0.135618] cm
HL_Channel := vectorize(HL_Baffle*N_FlocBaffle) = [6.91613; 2.16989] cm
# The cumulative head loss is the max that this tank could handle.
ψ_Pfunction(HW_Sed, Pi_HB) := (HW_Sed^2*α_ψ(Pi_HB)*K_P(Pi_HB)/2)^(1/3)
HW_Sed = 2 m
Pi_HB := 2, 2.1 .. 40
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