Pi_HbMin := 3  # Should go into Basis of Design. Doesn't really need to be accesible even to experts
# [reference: MasterProgram.xmcd]
W_GritWeir := 15 cm  # Does this need to be here? This length needs to be defined by the floating floc team.
# The new flocculation model more carefully distinguishes between maximum and average energydissipation rates. The flocculators should be designed based on a maximum allowed energy dissipation rate to ensure that suboptimal geometry (high h/b ratios) doesn't result in excessively high energy dissipation rates that could break flocs. However, since this model is now incorporating the concept of a maximum energy dissipation rate the energy dissipation rate guidelines need to be increased to account for the distinction between average and maximum.
# Because we are now using the concept of a maximum energy dissipation rate it should be possible to directly incorporate results from laminar flow flocculators to produce guidelines on the maximum allowable energy dissipation rates. One caveat is that the turbulent flow energy dissipation rates are time averaged and it is not yet clear what the expected temporal variability is for turbulent flow energy dissipation rates.
# CFD results and functions
# all design values from Yi, Wenqi, 2009
# The fraction of the maximum collision potential that could be achieved if the energy dissipation rate was uniformly distributed. Or, if this fraction of the available energy were uniformly distributed the collision potential would be the same as what it is given the nonuniformity in the energy dissipation rate distribution.
# ratio of water depth to baffle spacing
# Note that this data (ψ.Pdat) can not be used directly in design because it has units! It only applies to the case for b=0.1m (the case used in the CFD FLUENT analysis).
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ψ_Pdat := [0.49962; 0.65143; 0.67122; 0.71292; 0.89548; 1.00041; 1.24420; 1.45759; 2.15668]*m^(2/3)
Pi_HBdat := [2; 3; 4; 5; 8; 10; 15; 20; 40]  # h/b*values
α_ψdat := [0.65; 0.86; 0.87; 0.85; 0.71; 0.64; 0.53; 0.46; 0.33]
# The maximum energy dissipation rate is loosely defined as the the maximum energy dissipation rate that is seen by a significant fraction of the flow. We don't have a good way to characterize this parameter analytically yet, but I estimated this using the color contours of the energy dissipation rate (data from Yi, Wenqi, 2009). Note the very large values of this ratio for high h/b ratios. High h/b ratios have very nonuniform energy dissipation rates.
# Minor loss coefficient. This many equivalents of the kinetic energy are lost through one baffle. Note that the minor loss coefficient is very large for small h/b values
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K_Pdat := [9.60; 7.17; 4.32; 3.42; 3.15; 3.13; 3.22; 3.39; 3.84]
α_εdat := [1.875617391; 1.808368729; 1.776938668; 1.927164849; 3.356408643; 4.221784408; 6.332676611; 7.793864103; 13.75322341]
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α_ψ(Pi_HB) := linterp(Pi_HBdat, α_ψdat, Pi_HB)  # These functions use linear interpolation to create functional relationships as a function of the h/b ratios
α_ε(Pi_HB) := linterp(Pi_HBdat, α_εdat, Pi_HB)
K_P(Pi_HB) := linterp(Pi_HBdat, K_Pdat, Pi_HB)
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# True for h/b>5
3^(1/3) = 1.44225
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b := 0.1*m
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# True for h/b>3
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## Flocculator Functions
# The Floor function forces the number of baffle spaces to be an even integer
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N_FlocSpacesF(L, T, S) := Floor((L + T)/(S + T), 2)  # DEFINED HERE *******************
SofN_FlocBaffleF(L, T, N_Spaces) := (L + T)/N_Spaces - T
# The function below can also be used directly to solve for W by substituting S for W
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S_FlocBaffleIterative(Q, W, H, S, ED) := (K_P(H/S)*α_ε(H/S)/(2*H*ED))^(1/3)*Q/W  # recursive function
S_FlocBaffleF(Q, W, H, ED) :=
    S ← S_FlocBaffleIterative(Q, W, H, H/4, ED)
    error ← 1
    while error > 0.001
        S_new ← S_FlocBaffleIterative(Q, W, H, S, ED)
        error ← |S - S_new|/(S + S_new)
        S ← S_new
    return S
# This function returns a spacing that gives the target energy dissipation rate.
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# Collision potential per baffle (p for pantalla)
ψ_P(H, S) := (H^2*α_ψ(H/S)*K_P(H/S)/2)^(1/3)
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ED(Q, H, S, W) := α_ε(H/S)*K_P(H/S)/(2*H)*(Q/(W*S))^3
ED_Target(ψ) :=
    Pi ← [0.4; 0.7]
    m ← (ED_Floc[0] - ED_Floc[1])/((Pi[0] - Pi[1])*CP_Floc)
    b ← ED_Floc[0] - m*Pi[0]*CP_Floc
    ED_Target ← ED_Floc[0] if ψ ≤ Pi[0]*CP_Floc
    ED_Target ← m*ψ + b if ψ > Pi[0]*CP_Floc and ψ ≤ Pi[1]*CP_Floc
    ED_Target ← ED_Floc[1] if ψ > Pi[1]*CP_Floc
    return ED_Target
# This function gives a reasonable relationship between maximum energy dissipation rate and collision potential through a flocculator. This function is a placeholder until we get better information from our research teams.
#
# We can tweak these Pi terms to get the baffle distribution that we like and the head loss that we like
# The Pi terms determine at what fraction of the total collision potential does the energy dissipation rate start to drop and at what energy dissipation rate does it level off again.
# The following function cycles through each flocculator channel and checks the possible range of the number of baffles in a channel to see which number of baffles results in the correct energy dissipation rate and cumulative collision potential at the end of the channel.
N_FlocChannelSpacesF(ED_ChannelRange, ψ_ChannelRange, N_FlocBafflesMax, N_FlocBafflesMin) :=
    ψ_Cumulative ← 0
    Channel ← 0
    while ψ_Cumulative < CP_Floc
        i ← 0
        j ← 0
        while ED_ChannelRange[j] ≤ ED_Target(ψ_ChannelRange[j] + ψ_Cumulative) and i < (N_FlocBafflesMax - N_FlocBafflesMin)
            i ← i + 2
            j ← j + 1
        ψ_Cumulative ← ψ_Cumulative + ψ_ChannelRange[j]
        N_FlocChannelSpaces[Channel] ← i + N_FlocBafflesMin
        Channel ← Channel + 1
    N_FlocChannelSpaces[last(N_FlocChannelSpaces)] ← N_FlocChannelSpaces[last(N_FlocChannelSpaces)] - 1
    return N_FlocChannelSpaces
# The number of baffles in the last channel needs to be an even
# number so that the water flows smoothly up to the exit port to
# the sed tank.
## Calculation of Flocculator Geometry
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HW_FlocEnd := HW_Sed = 2.03576 m
S_FlocBaffleMax := SofN_FlocBaffleF(L_Sed, T_FlocBaffle, N_FlocSpacesF(L_Sed, T_FlocBaffle, HW_FlocEnd/Pi_HbMin)) = 0.87441 m  # HERE *******************
W_FlocChannel := max(S_FlocBaffleIterative(Q_Plant, S_FlocBaffleMax, HW_FlocEnd, S_FlocBaffleMax, ED_Floc[last(ED_Floc)]), W_FlocChannelMin) = 45 cm
S_FlocBaffleMin := S_FlocBaffleF(Q_Plant, W_FlocChannel, HW_FlocEnd, ED_Floc[0]) = 0.15876 m
N_FlocBafflesMin := N_FlocSpacesF(L_Sed, T_FlocBaffle, HW_FlocEnd/Pi_HbMin) = 2  # HERE *******************
N_FlocBafflesMax := N_FlocSpacesF(L_Sed - 2*S_FlocChannel, T_FlocBaffle, S_FlocBaffleMin) = 8  # HERE *******************
# Now calculate the maximum energy dissipation rate given the range of possible baffle spacings and the total collision potential for a channel full of baffles of that spacing.
i := 0 .. N_FlocBafflesMax - N_FlocBafflesMin
# Now calculate the collision potential for an entire channel for each of the possible number of baffles and the corresponding energy dissipation rate
ψ_ChannelRange[i] := ψ_P(HW_FlocEnd, SofN_FlocBaffleF(L_Sed, T_FlocBaffle, i + N_FlocBafflesMin))*(i + N_FlocBafflesMin)
ED_ChannelRange[i] := ED(Q_Plant, HW_FlocEnd, SofN_FlocBaffleF(L_Sed, T_FlocBaffle, i + N_FlocBafflesMin), W_FlocChannel)
# Calculate the number of spaces in each channel
Q_Plant = 0.012 m^3/s
N_FlocBafflesMax = 8
CP_Floc = 110 m^(2/3)
N_FlocBafflesMin = 2
N_FlocChannelSpaces := N_FlocChannelSpacesF(ED_ChannelRange, ψ_ChannelRange, N_FlocBafflesMax, N_FlocBafflesMin) = [8; 8; 8; 8; 8; 8; 8; 8; 8; 8; 8; 8; 7]
N_FlocChannels := length(N_FlocChannelSpaces)
Channels := 0 .. N_FlocChannels - 1  # range variable for the floc channels
N_FlocChannelBaffles := N_FlocChannelSpaces - 1
N_FlocBaffles := sum(N_FlocChannelBaffles) = 90  # Total number of baffles in the flocculator
# Now we need to calculate the following for each channel
# baffle center to center distance
# baffle separation distance
# head loss in each channel
# Calculate the baffle spacing given the number of baffles in each channel
S_FlocBaffle := SofN_FlocBaffleF(L_Sed, T_FlocBaffle, N_FlocChannelSpaces) = [0.188602; 0.188602; 0.188602; 0.188602; 0.188602; 0.188602; 0.188602; 0.188602; 0.188602; 0.188602; 0.188602; 0.188602; 0.22126] m
# Verify that the channels are all the correct length...
vectorize(N_FlocChannelSpaces*S_FlocBaffle) + (N_FlocChannelSpaces - 1)*T_FlocBaffle = [1.78882; 1.78882; 1.78882; 1.78882; 1.78882; 1.78882; 1.78882; 1.78882; 1.78882; 1.78882; 1.78882; 1.78882; 1.78882] m
ED_FlocChannel[Channels] := ED(Q_Plant, HW_FlocEnd, S_FlocBaffle[Channels], W_FlocChannel)
ED_FlocChannel = [9.9473; 9.9473; 9.9473; 9.9473; 9.9473; 9.9473; 9.9473; 9.9473; 9.9473; 9.9473; 9.9473; 9.9473; 5.22965] mW/kg
# This is the actual energy dissipation rate in each channel
# Calculate the collision potential for each channel
ψ_Channel[Channels] := ψ_P(HW_FlocEnd, S_FlocBaffle[Channels])*N_FlocChannelSpaces[Channels]
ψ_Total := sum(ψ_Channel) = 164.521 m^(2/3)
B_FlocBaffle := S_FlocBaffle + T_FlocBaffle  # center to center distance
HL_FlocBaffle := K_P(HW_FlocEnd/S_FlocBaffle)*Q_Plant^2/(2*g*(S_FlocBaffle*W_FlocChannel)^2) = [3.2049; 3.2049; 3.2049; 3.2049; 3.2049; 3.2049; 3.2049; 3.2049; 3.2049; 3.2049; 3.2049; 3.2049; 2.32398] mm
# head loss per baffle in each channel
# total head loss per channel
HL_FlocChannels := vectorize(HL_FlocBaffle*(N_FlocChannelBaffles + 1)) = [2.56392; 2.56392; 2.56392; 2.56392; 2.56392; 2.56392; 2.56392; 2.56392; 2.56392; 2.56392; 2.56392; 2.56392; 1.62679] cm
HL_Floc := HL_FlocBaffle*N_FlocChannelSpaces = 32.3938 cm  # total head loss in the flocculator
HW_FlocStart := HW_FlocEnd + HL_Floc = 2.3597 m
# Here we are assuming that the entire flocculator has extra tall walls. But that isn't necessary. The walls could be different heights for each channel.
H_Floc := HW_FlocStart + H_PlantFreeboard = 2.4597 m
L_FlocTank := N_FlocChannels*L_Sed = 23.2547 m  # Total length of floc tanks
Ti_Floc := HW_FlocEnd*L_FlocTank*W_FlocChannel/Q_Plant = 29.5881 min
# The width of the floc port that connects channels will be based on the baffle spacing in that channel
W_FlocPortEst := S_FlocBaffle = [18.8602; 18.8602; 18.8602; 18.8602; 18.8602; 18.8602; 18.8602; 18.8602; 18.8602; 18.8602; 18.8602; 18.8602; 22.126] cm
H_FlocPortEst := W_FlocChannel = 0.45 m
# This keeps the energy dissipation rate through the ports the same as through the baffles since the dimension of the port is actually exactly the same as the dimension through the baffles
A_FlocPort := W_FlocPortEst*H_FlocPortEst
W_FlocPort := W_FlocPortEst - S_FlocChannel
H_FlocPort := A_FlocPort/W_FlocPort
## Position calculations for each baffle
# Now we need to assign positions, lengths and elevations to floc baffles
L_FlocBaffleLower := HW_FlocEnd - S_FlocBaffle*Pi_FlocBaffle = [1.84716; 1.84716; 1.84716; 1.84716; 1.84716; 1.84716; 1.84716; 1.84716; 1.84716; 1.84716; 1.84716; 1.84716; 1.8145] m
# H.Floc should be an array with an element for each channel
L_FlocBaffleUpper := H_Floc - S_FlocBaffle*Pi_FlocBaffle = [2.2711; 2.2711; 2.2711; 2.2711; 2.2711; 2.2711; 2.2711; 2.2711; 2.2711; 2.2711; 2.2711; 2.2711; 2.23844] m
X_FlocBaffles :=
    for channel ∈ 0 .. N_FlocChannels - 2
        for i ∈ 0 .. N_FlocChannelBaffles[channel] - 1
            x[i, channel] ← S_FlocBaffle[channel] + B_FlocBaffle[channel]*i
    if (S_FlocChannel + W_InletChannel) > S_FlocBaffle[last(S_FlocBaffle)] and (2*S_FlocBaffle[last(S_FlocBaffle)]) > (S_FlocChannel + W_InletChannel)
        S_FlocBaffle[last(S_FlocBaffle)] ← SofN_FlocBaffleF(L_Sed - W_InletChannel + W_FlocPort[last(W_FlocPort)] - 2*S_FlocChannel, T_FlocBaffle, N_FlocChannelSpaces[last(N_FlocChannelSpaces)])
        for i ∈ 0 .. N_FlocChannelBaffles[last(N_FlocChannelBaffles)] - 1
            x[i, N_FlocChannels - 1] ← (S_FlocBaffle[last(S_FlocBaffle)] + T_FlocBaffle)*i + S_FlocChannel + W_InletChannel
        x[i, N_FlocChannels - 1]
    if (S_FlocChannel + W_InletChannel) > (2*S_FlocBaffle[last(S_FlocBaffle)])
        N_FlocChannelSpaces[last(N_FlocChannelSpaces)] ← N_FlocChannelSpaces[last(N_FlocChannelSpaces)] - 2
        N_FlocChannelBaffles[last(N_FlocChannelBaffles)] ← N_FlocChannelBaffles[last(N_FlocChannelBaffles)] - 2
        S_FlocBaffle[last(S_FlocBaffle)] ← SofN_FlocBaffleF(L_Sed - 2*S_FlocChannel, T_FlocBaffle, N_FlocChannelSpaces[last(N_FlocChannelSpaces)])
        for i ∈ 0 .. N_FlocChannelBaffles[last(N_FlocChannelBaffles)] - 1
            x[i, N_FlocChannels - 1] ← S_FlocBaffle[last(S_FlocBaffle)] + B_FlocBaffle[N_FlocChannels - 1]*i + W_InletChannel - W_FlocPort[last(W_FlocPort)]
        x[i, N_FlocChannels - 1]
    otherwise
        for i ∈ 0 .. N_FlocChannelBaffles[last(N_FlocChannelBaffles)] - 1
            x[i, last(N_FlocChannels)] ← S_FlocBaffle[channel] + B_FlocBaffle[channel]*i
        x[i, last(N_FlocChannels)]
    return x
# X array is the distance from the inside of the wall of the floc tank (on the side of the plant that has the inlet channel to the sed tank) to the face of the baffle closest to that end of the floc tank
S_FlocChannel + W_InletChannel = 0.513762 m
2*S_FlocBaffle[last(S_FlocBaffle)] = 0.44252 m
S_FlocBaffle = [0.188602; 0.188602; 0.188602; 0.188602; 0.188602; 0.188602; 0.188602; 0.188602; 0.188602; 0.188602; 0.188602; 0.188602; 0.22126] m
X_FlocBaffles = [
    0.188602, 0.188602, 0.188602, 0.188602, 0.188602, 0.188602, 0.188602, 0.188602, 0.188602, 0.188602, 0.188602, 0.188602, 0.598266;
    0.417205, 0.417205, 0.417205, 0.417205, 0.417205, 0.417205, 0.417205, 0.417205, 0.417205, 0.417205, 0.417205, 0.417205, 0.859526;
    0.645807, 0.645807, 0.645807, 0.645807, 0.645807, 0.645807, 0.645807, 0.645807, 0.645807, 0.645807, 0.645807, 0.645807, 1.12079;
    0.87441, 0.87441, 0.87441, 0.87441, 0.87441, 0.87441, 0.87441, 0.87441, 0.87441, 0.87441, 0.87441, 0.87441, 1.38205;
    1.10301, 1.10301, 1.10301, 1.10301, 1.10301, 1.10301, 1.10301, 1.10301, 1.10301, 1.10301, 1.10301, 1.10301, 0;
    1.33161, 1.33161, 1.33161, 1.33161, 1.33161, 1.33161, 1.33161, 1.33161, 1.33161, 1.33161, 1.33161, 1.33161, 0;
    1.56022, 1.56022, 1.56022, 1.56022, 1.56022, 1.56022, 1.56022, 1.56022, 1.56022, 1.56022, 1.56022, 1.56022, 0
] m
# Z array is the elevation of the bottom of the baffle
Z_FlocBaffles :=
    for channel ∈ Channels
        for i ∈ 0 .. N_FlocChannelBaffles[channel] - 1
            z[i, channel] ← mod(i, 2)*S_FlocBaffle[channel]
            z[i, N_FlocChannels - 1] ← mod(i + 1, 2)*S_FlocBaffle[N_FlocChannels - 1]
    return z
# For the last channel, the up/down placement of the
# baffles needed to be down at the channel port and
# up at the exit port.
Z_FlocBaffles = [
    0, 0, 0, 0, 0, 0, 0, 0, 0, 0, 0, 0, 0.22126;
    0.188602, 0.188602, 0.188602, 0.188602, 0.188602, 0.188602, 0.188602, 0.188602, 0.188602, 0.188602, 0.188602, 0.188602, 0;
    0, 0, 0, 0, 0, 0, 0, 0, 0, 0, 0, 0, 0.22126;
    0.188602, 0.188602, 0.188602, 0.188602, 0.188602, 0.188602, 0.188602, 0.188602, 0.188602, 0.188602, 0.188602, 0.188602, 0;
    0, 0, 0, 0, 0, 0, 0, 0, 0, 0, 0, 0, 0.22126;
    0.188602, 0.188602, 0.188602, 0.188602, 0.188602, 0.188602, 0.188602, 0.188602, 0.188602, 0.188602, 0.188602, 0.188602, 0;
    0, 0, 0, 0, 0, 0, 0, 0, 0, 0, 0, 0, 0.22126
] m
L_FlocBaffles :=
    for channel ∈ Channels
        for i ∈ 0 .. N_FlocChannelBaffles[channel] - 1
            l[i, channel] ← L_FlocBaffleUpper[channel] if mod(i, 2) == 1
            l[i, channel] ← L_FlocBaffleLower[channel] otherwise
            l[i, N_FlocChannels - 1] ← L_FlocBaffleLower[N_FlocChannels - 1] if mod(i, 2) == 1
            l[i, N_FlocChannels - 1] ← L_FlocBaffleUpper[N_FlocChannels - 1] otherwise
    return l
# L array is the total height (length) of the baffle
# For the last channel, the length of the
# baffles needed to be changed since the
# up/down had been adjusted.
L_FlocBaffles = [
    1.84716, 1.84716, 1.84716, 1.84716, 1.84716, 1.84716, 1.84716, 1.84716, 1.84716, 1.84716, 1.84716, 1.84716, 2.23844;
    2.2711, 2.2711, 2.2711, 2.2711, 2.2711, 2.2711, 2.2711, 2.2711, 2.2711, 2.2711, 2.2711, 2.2711, 1.8145;
    1.84716, 1.84716, 1.84716, 1.84716, 1.84716, 1.84716, 1.84716, 1.84716, 1.84716, 1.84716, 1.84716, 1.84716, 2.23844;
    2.2711, 2.2711, 2.2711, 2.2711, 2.2711, 2.2711, 2.2711, 2.2711, 2.2711, 2.2711, 2.2711, 2.2711, 1.8145;
    1.84716, 1.84716, 1.84716, 1.84716, 1.84716, 1.84716, 1.84716, 1.84716, 1.84716, 1.84716, 1.84716, 1.84716, 2.23844;
    2.2711, 2.2711, 2.2711, 2.2711, 2.2711, 2.2711, 2.2711, 2.2711, 2.2711, 2.2711, 2.2711, 2.2711, 1.8145;
    1.84716, 1.84716, 1.84716, 1.84716, 1.84716, 1.84716, 1.84716, 1.84716, 1.84716, 1.84716, 1.84716, 1.84716, 2.23844
] m
