# This design algorithm for a flocculator that maintains efficient geometry was adapted from Monroe's worksheet "Flocculator design high efficiency mw24" which should be in the Under Development folder. Refer to that file for full explanation and exploration of the basic design algorithm. This algorithm differs in that it accounts for space lost to a grit chamber at the beginning of the first channel and to the sed tank entrance at the end of the last channel. It also accounts for having an integer number of baffles in each channel.
# Design Algorithm steps
# Calculate entrance tank length in the first channel as a function of channel width
# Calculate the total volume of flocculator as the maximum of two constraints: 1) volume to meet collision potential given target head loss and 2) volume of two min-width channels
# Calculate the number of channels by taking the total volume, depth, and channel length, and dividing by the maximum channel width (taking into account volume lost to worst-case entrance tank at the beginning and volume lost to the sed tank entrance channel at the end)
# Calculate the channel width that gives the required volume with the calculated number of channels, which also gives entrance tank length
# Calculate the minimum number of obstacles and spacing between obstacles by assuming a maximum H/S ratio
# Calculate the spacing between baffles to achieve the target energy dissipation rate that will give the target head loss and collision potential. Correct baffle spacing to get integer number of baffles in a channel.
# Calculate the obstacle width (and nominal pipe diameter)
# Entrance tank
# The design of the plate settler unit is a function of the channel width. Here the entrance tank lengths are defined in terms of the channel width. The flocculator design then uses the worst case of the minimum flocculator channel width in its preliminary assumption of how much volume the entrance tank will take up.
# Single drain pipe diameter
ND_EtDrain := ND_PipeFlow(Q_Train, SDR_26, 2 m, 2 m, Nu_Water, E_Pvc, K_PipeEnt + K_PipeExit + K_El90)
PS_EtDrain := PS_Decision(ND_EtDrain)
PS_EtDrainStr := PSToString(PS_EtDrain)
# Plate settler unit
fN_EtPlates(W_Channel) := ceil(sqrt(Q_Train/((S_EtPlate + T_SedPlate)*W_Channel*V_EtCaptureBod*sin(AN_EtPlate))))
# Number of plates that minimizes total length of the plate settler unit.
fL_EtPlate(W_Channel) := Ceil(Q_Train/(fN_EtPlates(W_Channel)*W_Channel*V_EtCaptureBod*cos(AN_EtPlate)) - S_EtPlate*tan(AN_EtPlate), 10 cm)
# Length calculations
L_EtTopPlateExtension := HL_Lfom/sin(AN_EtPlate) + 5 cm  # Not important for the two train version  mrf222
L_EtWallToPlate := 3/2*S_Fitting + OD_Fitting(ND_EtDrain)
fL_EtFrontWallToFloat(W_Channel) := L_EtWallToPlate + (fL_EtPlate(W_Channel) + L_EtTopPlateExtension)*cos(AN_EtPlate) + T_SedPlate*sin(AN_EtPlate) + S_Fitting
fL_EtSlope1(W_Channel) := S_Fitting + (fN_EtPlates(W_Channel)*T_SedPlate + (fN_EtPlates(W_Channel) - 1)*S_EtPlate + CapHeight(ND_EtMod))*sin(AN_EtPlate) + fL_EtPlate(W_Channel)*cos(AN_EtPlate)
fL_EtFrontWallToLfom(W_Channel) := max(fL_EtFrontWallToFloat(W_Channel) + OD_Fitting(ND_EtFloat) + S_Fitting, S_Fitting/2 + OD_Fitting(ND_EtDrain) + fL_EtSlope1(W_Channel) + T_FlocDividingWall + 2*S_Fitting + (OR_Fitting(ND_RMPipe) - OR(ND_RMPipe)))
fL_Et(W_Channel) := fL_EtFrontWallToLfom(W_Channel) + OD(ND_RMPipe) + 2*S_Fitting
# Flocculator efficiency
Pi_VCBaffle := 1/(sqrt(K_FlocBaffle) + 1)
# It might be reasonable to allow for some Π.HS values that are greater than the value calculated above especially since the efficiency won't be affected that quickly. I think we need to have a slighly higher maximum H/S ratio so that creating a viable design is always possible.
Pi_HSMin := 3
Pi_HSMax := 6
Pi_HSTransition := round(Pi_VCBaffle^4*K_FlocBaffle/Pi_JetPlane^3)
α_ε := 2  # Define this for all subsequent analysis because we are assuming that our design will be in the high efficiency range.
Alpha_EpsilonFloc := α_ε
α_ψ := 1/α_ε^(1/6) = 0.890899
Alpha_PsiFloc := α_ψ
# Minimum flocculator volume and corresponding head loss and EDR
# HL_FlocMax | 40 cm | previous value, now a user input
# Volume constraint #1: two min-width channels
Z_FlocBottom := Plant_Origin[2] + T_FlocSlab
HW_FlocEnd := ZW_SedInletChannel - Z_FlocBottom
# The channel width is contrained by the minimum constructable width (1/2 sheet), the maximum width (full baffle sheet) and by the minimum width that achieves an H/S ratio greater than 3.
W_FlocChannelMaxPlate := W_SedPlate
W_FlocChannelMinPlate := W_SedPlate/2
L_Floc := L_Sed + 2*T_SedWall - 2*T_FlocWall
L_EtMaxPlate := fL_Et(W_FlocChannelMinPlate)
# Maximum length of the entrance tank assuming the channel width that corresponds to half the plate width (human width)
N_FlocChannelsMin := 2  # So that the entrance tank can be on the inlet side of the sed tank, adjacent to the chemical stock platform
Vol_FlocMinChannels := N_FlocChannelsMin*(L_Floc - L_EtMaxPlate - T_FlocDividingWall - 2*W_SedInletChannelPreWeir)*W_FlocChannelMinPlate*HW_FlocEnd
# Volume constraint #2: target collision potential with max head loss
ED_FlocAveMax := (g*HL_FlocMax/(CP_FlocBod*α_ε^(1/6)))^(3/2)  # Calculate average energy dissipation rate from the target head loss.
Ti_FlocMinCP := CP_FlocBod/(ED_FlocAveMax^(1/3)*α_ψ)
Vol_FlocMinCP := Q_Train*Ti_FlocMinCP
# Flocculator volume and corresponding energy dissipation rate and head loss to meet target collision potential
Vol_FlocBod := max(Vol_FlocMinChannels, Vol_FlocMinCP)
Ti_FlocMin := Vol_FlocBod/Q_Train
ED_FlocAveCP := (CP_FlocBod/(Ti_FlocMin*α_ψ))^3
ED_FlocAveMinSettling := 5*mW/kg  # Minimum average energy dissipation rate to prevent flocs settling in the flocculator
ED_FlocAveBod := max(ED_FlocAveMinSettling, ED_FlocAveCP)
HL_FlocBod := ED_FlocAveBod^(2/3)*α_ε^(1/6)*CP_FlocBod/g = 40 cm
# Number of channels and channel width
# The channel width must be greater than 1/2 of the plate width and greater than the minimum width to achieve a Π.HS>3.
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W_FlocChannelMinEfficient := Pi_HSMin*(K_FlocBaffle/(2*HW_FlocEnd*ED_FlocAveBod))^(1/3)*Q_Train/HW_FlocEnd
W_FlocChannelMin := max(W_FlocChannelMinEfficient, W_FlocChannelMinPlate) = 0.53 m
L_EtMax := fL_Et(W_FlocChannelMin)
# Number of channels and channel width
# Assume we can use as large a width as the max plate width in order to get the fewest number of channels possible to minimize cost. Constrained to be an even number of channels to keep the entrance tank accross the walkway from the chemical platforms.
#
# Use double the length taken up by the entrance channel to the sed tanks because the baffles that will need to be removed in order to end on a high baffle will likely account for additional volume.
N_FlocChannels := Ceil((Vol_FlocBod/(W_FlocChannelMaxPlate*HW_FlocEnd) + L_EtMax + T_FlocDividingWall + 2*W_SedInletChannelPreWeir)/L_Floc, 2)
N_FlocChannels == {
    1 if Q_Plant < 16*L/s
    N_FlocChannels otherwise
}
W_FlocChannelCP := Vol_FlocBod/(HW_FlocEnd*(N_FlocChannels*L_Floc - L_EtMax - T_FlocDividingWall - 2*W_SedInletChannelPreWeir))
W_FlocChannel := Ceil(max(W_FlocChannelCP, W_FlocChannelMin), 1 cm)
# The max function is required to make sure that we don't specify a channel narrower than the minimum width for the low flow rates where the length of the sedimentation tank gives a channel length that is longer than required to meet the required collision potential.
L_Et := fL_Et(W_FlocChannel)
# Test this out for the two train plant! mrf222
# Obstacle spacing
# Find the maximum distance between obstacles. In this analysis H is the distance between obstacles rather than the depth of water.
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H_FlocObstacleMax := (K_FlocBaffle/(2*ED_FlocAveBod))^(1/4)*(Pi_HSMax*Q_Train/W_FlocChannel)^(3/4)
# Find the minimum number of expansions per baffle space.
N_FlocSpaceExpansions := ceil(HW_FlocEnd/H_FlocObstacleMax)
N_FlocSpaceObstacles := N_FlocSpaceExpansions - 1
# This number of obstacles includes the expansion created by the baffle. Calculate the distance between expansions.
H_FlocObs := HW_FlocEnd/N_FlocSpaceExpansions
# Baffle spacing
# Note that in this equation we now use the distance between expansions as calculated above rather than the water depth for H.
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S_FlocBaffleMin := (K_FlocBaffle/(2*H_FlocObs*ED_FlocAveBod))^(1/3)*(Q_Train/W_FlocChannel) = 0.160848 m
N_FlocChannelSpaces := Ceil((L_Floc + T_FlocBaffle)/(S_FlocBaffleMin + T_FlocBaffle), 2)
N_FlocChannelBaffles := N_FlocChannelSpaces - 1
S_FlocBaffle := (L_Floc - N_FlocChannelBaffles*T_FlocBaffle)/N_FlocChannelSpaces = 0.151145 m
# Number of baffle spaces and expansions
# First channel
N_FlocFirstChannelSpaces := Floor((L_Floc - L_Et - T_FlocDividingWall + T_FlocBaffle)/(S_FlocBaffle + T_FlocBaffle) + 1, 2) - 1
N_FlocFirstChannelBaffles := N_FlocFirstChannelSpaces
# Last channel
N_FlocLastChannelSpaces := Floor((L_Floc - W_SedInletChannelPreWeir + T_FlocBaffle)/(S_FlocBaffle + T_FlocBaffle), 2)
N_FlocLastChannelBaffles := N_FlocLastChannelSpaces
# Total
N_FlocSpaces := N_FlocFirstChannelSpaces + N_FlocLastChannelSpaces + N_FlocChannelSpaces*(N_FlocChannels - 2)
N_FlocExpansions := N_FlocSpaces*N_FlocSpaceExpansions
N_FlocBaffles := N_FlocFirstChannelBaffles + N_FlocLastChannelBaffles + N_FlocChannelBaffles*(N_FlocChannels - 2)
# Final parameters
# Collision potential
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CP_FlocExpansion := (K_FlocBaffle^2*H_FlocObs^4/(4*α_ε))^(1/6) = 0.781763 m^(2/3)
CP_Floc := N_FlocExpansions*CP_FlocExpansion = 79.7398 m^(2/3)
# Fluid velocity
# The fluid velocity is a traditional design target and thus we can compare our design with tradition.
V_Floc := Q_Train/(S_FlocBaffle*W_FlocChannel)
V_MaxSchulz := 0.3*m/s
V_Max10State := 1.5*ft/s = 0.4572 m/s
V_MinSchulz := 0.1*m/s
V_Min10State := 0.5*ft/s = 0.1524 m/s
# Head loss
HL_Floc := K_FlocBaffle*V_Floc^2/(2*g)*N_FlocExpansions = 0.481634 m
# H/S ratio
Pi_FlocHSMin := H_FlocObs/S_FlocBaffle
# Geometry for the baffle spaces at the end of the flocculator where head loss hasn't accumulated (and for contractions below the top row in the case of additional obstacles, where head loss does not effect length of the expansion.
Pi_FlocHSMax := (H_FlocObs + HL_Floc)/S_FlocBaffle  # Geometry where head loss effects the length of the expansion
# Energy dissipation rate
ED_FlocAve := K_FlocBaffle/(2*H_FlocObs)*(Q_Train/(W_FlocChannel*S_FlocBaffle))^3 = 12.1224 mW/kg
ED_FlocMax := α_ε*ED_FlocAve
# Average velocity gradient
G_FlocAve := sqrt(ED_FlocAve/Nu_Water)
# Residence time
Vol_Floc := (N_FlocChannels*L_Floc - L_Et - T_FlocDividingWall)*W_FlocChannel*(HW_FlocEnd + HL_Floc/2) = 7.82622 m^3
Ti_Floc := Vol_Floc/Q_Train
Ti_FlocActive := (N_FlocChannels*L_Floc - L_Et - T_FlocDividingWall - (S_FlocBaffle*(N_FlocChannelSpaces - N_FlocLastChannelSpaces)))*W_FlocChannel*HW_FlocEnd/Q_Train
# G Theta
GTheta_Floc := G_FlocAve*Ti_FlocActive
# Obstacle design
# The obstacles will block the flow such that the contraction occupies Pi_VCBaffle =of the width of the space between the baffles.
W_FlocObstacleWake := S_FlocBaffle*(1 - Pi_VCBaffle)
# For half pipes, assume there is no vena contracta, so the un-blocked space should be equal to the width of the jet following the turn around a plate. The obstacles are the same for upflow and downflow spaces.
ND_FlocObs :=
    i ← 0
    ND_Obs ← AvailND[i]
    while W_FlocObstacleWake > 2*OR(ND_Obs)
        i ← i + 1
        ND_Obs ← AvailND[i]
    return ND_Obs
PS_FlocObs := SDR_41
PS_FlocObsStr := PSToString(PS_FlocObs)
# Flocculator dimensions
# Elevations
ZW_FlocEnd := Z_FlocBottom + HW_FlocEnd
ZW_FlocMax := ZW_FlocEnd + HL_Floc
Z_FlocTop := ZW_FlocMax + H_PlantFreeboard - H_FlocFreeBoard
Z_FlocLowBaffleTop := Z_FlocBottom + HW_FlocEnd - S_FlocBaffle*Pi_FlocBaffle
Z_FlocHighBaffleBottom := Z_FlocBottom + S_FlocBaffle*Pi_FlocBaffle
H_Floc := Z_FlocTop - Z_FlocBottom
HW_FlocMax := ZW_FlocMax - Z_FlocBottom
# Baffles
H_FlocBaffleLow := Z_FlocLowBaffleTop - Z_FlocBottom
H_FlocBaffleHigh := Z_FlocTop - Z_FlocHighBaffleBottom
B_FlocBaffle := S_FlocBaffle + T_FlocBaffle
# Ports
W_FlocPort := S_FlocBaffle - S_FlocBaffleSetBackPlastic
H_FlocPort := S_FlocBaffle*W_FlocChannel/W_FlocPort
W_Floc := N_FlocChannels*W_FlocChannel + (N_FlocChannels - 1)*T_FlocDividingWall
# Final entrance tank dimensions
# Plate settlers
N_EtPlates := fN_EtPlates(W_FlocChannel)
L_EtPlate := fL_EtPlate(W_FlocChannel)
L_EtTopPlate := L_EtPlate + L_EtTopPlateExtension
# Lengths
L_EtFrontWallToLfom := fL_EtFrontWallToLfom(W_FlocChannel)
L_EtFrontWallToFloat := fL_EtFrontWallToFloat(W_FlocChannel)
L_EtSlope1 := fL_EtSlope1(W_FlocChannel)
L_EtSlope2 := L_Et - L_EtSlope1 - OD_Fitting(ND_EtDrain) - S_Fitting/2
# Width
W_Et := W_FlocChannel
# Rapid mix
D_RMOrifice := D_PipeED(ED_RapidMix, Q_Train, Pi_VCOrifice, Pi_JetRound)
HL_RMOrifice := h_orifice(D_RMOrifice, Pi_VCOrifice, Q_Train)
HL_RMPipe := h_l(Q_Train, ID(ND_RMPipe, PS_RMPipe), 1 m, K_PipeExit, Nu_Water, E_Pvc)
D_RMOrificeSplit := D_PipeED(ED_RapidMix, Q_Train, Pi_VCOrifice, Pi_JetRound)
# mrf222 added for the multiple treatment train option
HL_RMOrificeSplit := h_orifice(D_RMOrifice, Pi_VCOrifice, Q_Train)
HL_RMPipeSplit := h_l(Q_Train, ID(ND_RMPipeSplit, PS_RMPipeSplit), 1 m, K_PipeExit, Nu_Water, E_Pvc)
T_EtUpperSlab := 15 cm
# Elevations and heights
Z_LfomBottom := ZW_FlocMax + HL_RMOrifice + HL_RMPipe + H_LfomFreefall
Z_EtUpperSlab := Z_LfomBottom - (CapHeight(ND_EtMod) + (N_EtPlates - 1)*(S_EtPlate + T_SedPlate))*cos(AN_EtPlate)
ZW_EtMax := Z_LfomBottom + HL_Lfom
Z_EtTop := ZW_EtMax + H_PlantFreeboard
H_Et := Z_EtTop - Z_FlocBottom
# This is not apparent depth, but if the entrance tank and flocculator share a slab it's the distance from the slab to the top of the entrance tank wall. The base of the entrance tank is then filled in (or left empty as a coagulant contact chamber).
H_EtUpper := Z_EtTop - Z_EtUpperSlab
H_EtSlope1 := L_EtSlope1*tan(AN_EtPlate)
Z_EtDrain := Z_EtUpperSlab - H_EtSlope1
H_EtSlope2 := min(Z_LfomBottom - Z_EtUpperSlab, L_EtSlope2*tan(AN_EtPlate))
H_EtDrain := Z_EtDrain - Z_FlocBottom
H_EtApparent := Z_EtTop - Z_EtDrain
Z_LfomBottomSplit := ZW_FlocMax + HL_RMOrificeSplit + HL_RMPipeSplit + H_LfomFreefall
Z_EtUpperSlabSplit := Z_LfomBottomSplit - (CapHeight(ND_EtMod) + (N_EtPlates - 1)*(S_EtPlate + T_SedPlate))*cos(AN_EtPlate)
ZW_EtMaxSplit := Z_LfomBottomSplit + HL_Lfom
Z_EtTopSplit := ZW_EtMaxSplit + H_PlantFreeboard
H_EtSplit := Z_EtTopSplit - Z_FlocBottom
H_EtUpperSplit := Z_EtTopSplit - Z_EtUpperSlabSplit
Z_EtDrainSplit := Z_EtUpperSlabSplit - H_EtSlope1
H_EtSlope2Split := min(Z_LfomBottomSplit - Z_EtUpperSlabSplit, L_EtSlope2*tan(AN_EtPlate))
H_EtDrainSplit := Z_EtDrainSplit - Z_FlocBottomSplit
H_EtApparentSplit := Z_EtTopSplit - Z_EtDrainSplit
# Slope angles
AN_EtSlope1 := AN_EtPlate
AN_EtSlope2 := atan(H_EtSlope2/L_EtSlope2)
AN_EtSlope2Split := atan(H_EtSlope2Split/L_EtSlope2)
# Real capture velocity
V_EtCapture := Q_Train/((N_EtPlates - 1)*W_Et*L_EtPlate*cos(AN_EtPlate))
V_EtCaptureSplit := Q_Train/((N_EtPlates - 1)*W_Et*L_EtPlate*cos(AN_EtPlate))
# Rapid mix contact space
# This is the space below the rapid mix outlet, before the first floc baffle, which provides contact time to finish micro-scale mixing of the coagulant.
L_FlocContact := L_Floc - N_FlocFirstChannelBaffles*(S_FlocBaffle + T_FlocBaffle) - L_Et - T_FlocDividingWall
H_FlocContact := Z_EtUpperSlab - Z_FlocBottom - T_EtUpperSlab
Vol_FlocContact := W_FlocChannel*L_FlocContact*H_FlocContact
Ti_FlocContact := Vol_FlocContact/Q_Train
H_FlocContactSplit := Z_EtUpperSlabSplit - Z_FlocBottom - T_EtUpperSlab
Ti_FlocContactSplit := Vol_FlocContact/Q_Train
# Floc channel drain
Q_FlocDrain :=
    Vol_Floc/(N_FlocChannels*Ti_FlocDrain) if N_FlocChannels < 2
    Vol_Floc/((N_FlocChannels - 1)*Ti_FlocDrain) otherwise
ND_FlocDrain := ND_PipeFlow(Q_FlocDrain, SDR_26, HW_FlocEnd/2, 0.5 m, Nu_Water, E_Pvc, K_PipeEnt + K_El90 + K_PipeExit)
PS_FlocDrain := PS_Decision(ND_FlocDrain)
PS_FlocDrainStr := PSToString(PS_FlocDrain)
# Chemical elevations
ZW_CdcCht := Z_EtTop + H_DoserAssembly
Z_CdcFloatValveOrifice := ZW_CdcCht + H_CdcFloatvalve
Z_CoagTankOutlet := Z_CdcFloatValveOrifice + H_CoagTankAboveHeadTank
Z_CoagTank := Z_CoagTankOutlet - B_StockOutlet
# Trash rack
D_EtTrashRackHole := 1/2*in
S_EtTrashRackHoleMin := 1/4*in
N_EtTrashRackHolesHoriz := floor((W_Et - S_EtTrashRackHoleMin)/(D_EtTrashRackHole + S_EtTrashRackHoleMin))
S_EtTrashRackHole := (W_Et - N_EtTrashRackHolesHoriz*D_EtTrashRackHole)/(N_EtTrashRackHolesHoriz + 1)
N_EtTrashRackHolesVert := floor((HL_Lfom + L_EtPlate*sin(AN_EtPlate) - (T_SedPlate + T_Acrylic)*cos(AN_EtPlate) - S_EtTrashRackHole)/(D_EtTrashRackHole + S_EtTrashRackHole))
# Conduction line size
ND_ConductionLine := ND_PipeFlow(Q_Train, SDR_26, 3 m, 0.5 m, Nu_Water, E_Pvc, 8*K_El90)
# Arbitrary sizing calculation that will give something close to expected condution line diameter
