# PF-Flocculator
# Flocculator efficiency
Pi_VCBaffle := 1/(sqrt(K_FlocBaffle) + 1)
# It might be reasonable to allow for some Π.HS values that are greater than the value calculated above especially since the efficiency won't be affected that quickly. I think we need to have a slighly higher maximum H/S ratio so that creating a viable design is always possible.
Pi_HSMin := 3
Pi_HSMax := 6
Pi_HSTransition := round(Pi_VCBaffle^4*K_FlocBaffle/Pi_JetPlane^3)
α_ε := 2  # Define this for all subsequent analysis because we are assuming that our design will be in the high efficiency range.
Alpha_EpsilonFloc := α_ε
α_ψ := 1/α_ε^(1/6) = 0.890899
Alpha_PsiFloc := α_ψ
# Pipe Size
V_ScourMin := 0.15*m/s
ID_MaxScour := sqrt(4*Q_Plant/(π*V_ScourMin))
ID_Floc := FloorNearest(ID_MaxScour, AvailID(SDR_26))
ND_Floc := ND(ID_Floc, SDR_26)
A_Floc := ID_Floc^2*π/4
V_Floc := Q_Plant/A_Floc
# AguaClara Collision Potential Design
HL_FlocMax := 50 cm
# Volume constraint: target collision potential with max head loss
ED_FlocAveMax := (g*HL_FlocMax/(CP_FlocBod*α_ε^(1/6)))^(3/2)  # Calculate average energy dissipation rate from the target head loss.
Ti_FlocMin := CP_FlocBod/(ED_FlocAveMax^(1/3)*α_ψ)
Vol_FlocBod := Q_Plant*Ti_FlocMin
ED_AveCP := (CP_FlocBod/(Ti_FlocMin*α_ψ))^3
ED_FlocAveMinSettling := 5*mW/kg  # Minimum average energy dissipation rate to prevent flocs settling in the flocculator
ED_FlocAveBod := max(ED_FlocAveMinSettling, ED_AveCP)
G_Floc := sqrt(ED_AveCP/Nu_Water)
OD(0.5 in) =  # error: This variable is undefined.
Gθ := G_Floc*Ti_FlocMin
HL_FlocBod := ED_AveCP^(2/3)*α_ε^(1/6)*CP_FlocBod/g
L_FlocCP := Vol_FlocBod/A_Floc
# 3 m por 1 m
H_PipeLength := 2 m
N_PipeLengths := ceil(L_FlocCP/H_PipeLength)
L_Structure := 3 m
W_Structure := 1 m
W_Rowmax := W_Structure - 0.5 m
N_PipesPerRow := floor(W_Rowmax/OD(ND_Floc))
N_Rows := ceil(N_PipeLengths/N_PipesPerRow)
L_Structure/OD(ND_Floc) =  # error
N_FlocPipes := ceil(L_FlocCP/(6 m))  # Also needs to include extra pipes for headloss, unless it's completely inclosed.
# High G Design
HL_FlocMax = 0.5 m  # Choose GTheta or HL.Floc Max as design parameters
G_FlocBod := 180 Hz  # G Picked based on maximum Length of flocculator for El Carpintero Design
ED_AveG := G_FlocBod^2*Nu_Water
ED_MaxG := 2*ED_AveG
Theta_FlocG := g*HL_FlocMax/ED_AveG
GTheta := G_FlocBod*Theta_FlocG
L_FlocG := V_Floc*Theta_FlocG
HW_FlocculatorFirst := HW_SedTank + HL_SedDiffuser + HL_ToInlet + HL_SedDistributionManifoldMax + HL_FlocMax
H_FlocLength := HW_FlocculatorFirst - HL_FlocMax
N_PipeLengthsG := ceil(L_FlocG/H_FlocLength)
N_PipesPerRow =  # error
N_RowsG := ceil(N_PipeLengthsG/N_PipesPerRow)
L_Floc := N_RowsG*OD(ND_Floc) + 1/2*OD_Fitting(ND_Floc)
# Added 1/2 OD Fitting incase there is a gap between each floc row created by the accesories. This value is conservative
W_Floc := N_PipesPerRow*OD(ND_Floc) + ElbowRadius(ND_Floc)  # ElBowRadius to account for space in between vertical floc columns
W_FlocToSed := ElbowRadius(ND_Floc) + TeeLength(ND_Floc) + MaleAdapterLength(ND_Floc) + 2*ElbowRadius(ND_SedManifold) + TeeLength(ND_SedManifold) + FerncoCouplingLength(ND_SedManifold) + S_Fitting
W_FlocToSed =  # error  # Need a picture of this.... Unsure of value of adaptor length here- 6" to 3", might need two adapters
L_FlocToSed := L_SedDistributionManifold
Area_FlocG := W_Floc*L_Floc
# Contraction Design
Π_HSMax := 5
Π_vc := 0.62
Π_HSTarget := 5
Π_vcG := 0.62
Π_Expansion := Π_HSMax/Π_vc^2 = 13.0073  # distance between contractions/contracted width
Π_ExpansionG := Π_HSTarget/Π_vcG^2 = 13.0073
D_Contraction := 1/2*ID_Floc
# If the maximum orifice dimension is 1/2D (one half of the chip removed), then the max spacing between orifices can be calculated from the Π.Expansion factor
D_ContractionG := 1/2*ID_Floc
H_ContractionCP := D_Contraction*Π_vc*Π_Expansion
H_ContractionG := D_ContractionG*Π_vc*Π_Expansion
N_ContractionsCP := ceil(L_FlocCP/H_ContractionCP)
N_ContractionG := ceil(L_FlocG/H_ContractionG)
HL_ContractionCP := HL_FlocMax/N_ContractionsCP
HL_ContractionG := HL_FlocMax/N_ContractionG
A_ContractionG := A_Floc/(sqrt(2*g*HL_ContractionG)/V_Floc + 1)
A_ContractionCP := A_Floc/(sqrt(2*g*HL_ContractionCP)/V_Floc + 1)
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# Guess:
AngleGuess := 27/32*π = 2.65072
Given
A_ContractionG == 1/2*(ID_Floc/2)^2*(AngleGuess - sin(AngleGuess))
Try(ID_Floc, A_ContractionG) := Find(AngleGuess)
# Guess:
AngleGuessCP := 27/32*π = 2.65072
Given
A_ContractionCP == 1/2*(ID_Floc/2)^2*(AngleGuessCP - sin(AngleGuessCP))
TryA(ID_Floc, A_ContractionCP) := Find(AngleGuessCP)
AngleCP := TryA(ID_Floc, A_ContractionCP)
AngleG := Try(ID_Floc, A_ContractionG)
L_ChordCP := 2*ID_Floc/2*sin(AngleCP/2)
L_ChordG := 2*ID_Floc/2*sin(AngleG/2)
H_SedmentHeight := ID_Floc/2 - ID_Floc/2*(1 - cos(AngleG/2)) - 1/4*in
# Greater than 0
# to be feasible
Area_CheckCP := 1/2*(ID_Floc/2)^2*(AngleCP - sin(AngleCP))
Area_CheckG := 1/2*(ID_Floc/2)^2*(AngleG - sin(AngleG))
K_FlocBaffleCP := (A_Floc/Area_CheckCP - 1)^2
K_FlocBaffleG := (A_Floc/Area_CheckG - 1)^2
HL_CheckCP := V_Floc^2/(2*g)*K_FlocBaffleCP*N_ContractionsCP
HL_G := V_Floc^2/(2*g)*K_FlocBaffleG
A_RatioCP := A_ContractionCP/A_Floc
A_RatioG := A_ContractionG/A_Floc
H_ContractionGActual := L_FlocG/N_ContractionG
ED_FlocAveCP := K_FlocBaffleCP/(2*H_ContractionCP)*(Q_Plant/(ID_Floc^2*π/4))^3
ED_FlocAveG := K_FlocBaffleG/(2*H_ContractionGActual)*(Q_Plant/(ID_Floc^2*π/4))^3
ED_FlocMaxCP := α_ε*ED_FlocAveCP
ED_FlocMaxG := α_ε*ED_FlocAveG
G_FlocCP := sqrt(ED_FlocAveCP/Nu_Water)
G_FlocG := sqrt(ED_FlocAveG/Nu_Water)
Gθ_CP := G_FlocCP*Ti_FlocMin
Gθ_G := G_FlocG*Theta_FlocG
CP_FlocG := Theta_FlocG*ED_FlocAveG^(1/3)*α_ψ
# Entrance Tank and Rapid Mix Design
ND_Lfom := fND_LfomPipe(Q_Plant, HL_Lfom, Π_LfomSafety, SDR_26)
HL_Lfom =  # error
D_RMOrifice := D_PipeED(ED_RapidMix, Q_Plant, Pi_VCOrifice, Pi_JetRound)
HL_RMOrifice := h_orifice(D_RMOrifice, Pi_VCOrifice, Q_Plant)
L_RMPipe := 1.5 m
K_RMPipe := 2*K_El90
HL_RMPipe := h_l(Q_Plant, ND_Lfom, L_RMPipe, K_RMPipe, Nu_Water, E_Pvc)
ND_EtDrain =  # error  # Define this based on a maximum headloss later...
ND_PlantInlet := 3 in
ND_Float := 4 in
L_Et := 4*S_Fitting + OD(ND_PlantInlet) + OD(ND_Lfom) + ND_Float
W_Et := 2*S_Fitting + OD(ND_Lfom)
HL_MaxTrashRack := 15 cm
ND_MaxTrashRack := 3/16*in  # Use a mesh instead
N_Orifice := A_orifice(HL_MaxTrashRack, Pi_VCOrifice, Q_Plant)/(ND_MaxTrashRack^2*π/4)  # Probably not feasible, use an aluminum mesh instead
# Elevations
Z_FlocculatorFirst := HW_FlocculatorFirst
HW_FlocculatorLast := HW_FlocculatorFirst - HL_FlocMax + HL_FlocMax*(1/N_PipeLengthsG)
Z_RapidMix := Z_FlocculatorFirst
# Is it worth making the rapid mix orifice even lower to avoid the problem
# with trapped air below the rapid mix and above the HW in the flocculator?
# Maybe drop the Rapid Mix 5 cm into the First flocculator tube...
Z_EntranceTankBottom := Z_RapidMix + HL_RMOrifice + HL_RMPipe + H_LfomFreefall + H_Safety
Z_LfomStart := Z_EntranceTankBottom + 0.8/2*ND_Lfom
ZW_EtMax := Z_LfomStart + HL_Lfom
Z_EntranceTankTop := ZW_EtMax + S_Fitting
H_EntranceTank := Z_EntranceTankTop - Z_EntranceTankBottom
Z_ChemicalPlatformBottom := Z_EntranceTankTop + 10 cm  # 10 cm for head loss through CHT Orifice
Z_ChemicalPlatformTop := Z_ChemicalPlatformBottom + 80 cm  # 80 cm for stock tank height
Z_StructureMinimum := Z_ChemicalPlatformTop + 50 cm  # 50 cm for operator access to fill stock tanks
# Materials
# Tanque de Entrada
Area_EntranceTankPlate := L_Et*W_Et + 2*H_EntranceTank*L_Et + 2*H_EntranceTank*W_Et
A_Ordered := 24 in*24*in*3 = 1.11484 m^2
Coupling_NDLfom := 1
ND_Lfom =  # error
ND_Float = 4 in  # 1 inch thick pvc disc
D_RMOrifice =  # error  # Acrillic Piece
# Flocculador
Lance_FlocculatorTube := ceil((L_FlocG + HL_FlocMax/2*N_PipeLengthsG)/(6 m))
# Fernco ND_Lfom =
# Adaptor from  ND_Lfom = to ND_Floc =
N_Elbow90 := N_PipeLengthsG + 1
N_Tee := N_PipeLengthsG
# Flocculador to Sed Distribution Manifold System
N_TubeLanceDistributionManifold := ceil(L_SedDistributionManifold/(6 m))
N_TeeDistribution := N_SedTank - 1
ND_SedDistributionManifold =  # error
N_Elbow90Distribution := 1
ND_SedDistributionManifold =  # error
# to
ND_SedManifold =  # error
N_Adaptor90Distribution := N_SedTank
N_Elbow90SedLaunder := 2*N_SedTank
N_ValveSedLaunder := N_SedTank
N_TeeSedLaunder := N_SedTank
N_SedDrainValve := N_SedTank + 1
ND_DistributionManifoldDrain =  # error
N_TubeLanceDrainSize := ceil(L_SedDistributionManifold/(6 m))
