## Model Inputs
D_Fractal := 2.3  # based on data from Adachi
NTU := 1.7*mg/L
D_Clay := 4 μm
Π_HD := 0.1  # ratio of clay platelet height to diameter
Φ_Floc := 45/24  # shape factor for drag on flocs used in terminal velocity equation
# 0 is Alum
# 1 is PACl
# An enumerated type that is used in many of the functions below to select which coagulant to use in the analysis.
EN_Chem
D_PACl := 180 nm  # Estimated diameters of the nanoglobs formed by PACl and Alum
# ((AlO4Al12(OH)24(H2O)12)7+)
D_Alum := 70 nm
μ_H2O(Τ) := 2.414*10^-5*Pa*s*10^(247.8*K/(Τ - 140 K))
WaterDensityTable := [
    0, 999.9;
    5, 1000;
    10, 999.7;
    20, 998.2;
    30, 995.7;
    40, 992.2;
    50, 988.1;
    60, 983.2;
    70, 977.8;
    80, 971.8;
    90, 965.3;
    100, 958.4
]
cubicspline(xarray, yarray, x) := interp(cspline(xarray, yarray), xarray, yarray, x)
ρ_H2O(Τ) := cubicspline(WaterDensityTable[:, 0], WaterDensityTable[:, 1]*kg/m^3, Τ/K - 273.15)
ν_H2O(Τ) := μ_H2O(Τ)/ρ_H2O(Τ)
ρ_Clay := 2650*kg/m^3
ρ_AlOH3 := 2420*kg/m^3
# Estimated densities of the coagulant precipitate nanoglobs
ρ_PACl := 1138*kg/m^3
MW_Ca := 40*gm/mole
MW_Al := 27*gm/mole
MW_S := 32.064*gm/mole
MW_O := 16*gm/mole
MW_H := 1.008*gm/mole
MW_C := 12*gm/mole
MW_Alum := 2*MW_Al + 3*(MW_S + 4*MW_O) + 14.3*(2*MW_H + MW_O)
MW_Alum = 599.821 gm/mol
MW_CalciumCarbonate := MW_Ca + MW_C + 3*MW_O
MW_AlOH3 := MW_Al + 3*(MW_O + MW_H)
MW_CalciumCarbonate = 100 gm/mol
MW_PACl := 13*MW_Al + 24*(MW_O + 2*MW_H) + 16*MW_O = 1039.38 gm/mol
# From Stock Tank Mixing report Fall 2013 https://confluence.cornell.edu/download/attachments/137953883/20131213_Research_Report.pdf?version=1&modificationDate=1386988551000
ρ_PAClSolution(C_Al, Τ) := 0.492*C_Al*MW_PACl/(MW_Al*13) + ρ_H2O(Τ)
C_Alf(ρ_PAClSolution, Τ) := 13*MW_Al*(ρ_PAClSolution - ρ_H2O(Τ))/(0.492*MW_PACl)  # Concentration of a PACl solution given the solution density
# Given aluminum dose find coagulant precipitate concentration
C_Precipitate(C_Al, EN_Chem) :=
    C_Precipitate ← C_Al/MW_Al*MW_AlOH3/1 if EN_Chem == 0
    C_Precipitate ← C_Al/MW_Al*MW_PACl/13 otherwise
    return C_Precipitate
D_Coag(EN_Chem) :=
    D_Coag ← D_Alum if EN_Chem == 0
    D_Coag ← D_PACl otherwise
    return D_Coag
η_Coag(EN_Chem) :=
    η_Coag ← 0.4*mm/s if EN_Chem == 0
    η_Coag ← 0.4*mm/s otherwise
    return η_Coag  # This is the fitting parameter for the flocculation model. Currently we set this to be the same for both coagulants.
C_Floc(C_Al, C_Clay, EN_Chem) := C_Precipitate(C_Al, EN_Chem) + C_Clay
Mole_Al(C_Al) := C_Al/MW_Al
N_A := 6.0221415*10^23*mole^-1  # Avogadro constant
# annotation to a formula above: from The NIST Reference on Constants, Units, and Uncertainty, from CODATA Recommended Values of the Fundamental Constants - 2002, by Peter J. Mohr and Barry N. Taylor, National Institute of Standards and Technology.
Λ_Al(C_Al) := (1/(N_A*Mole_Al(C_Al)))^(1/3)  # Separation distance between Aluminum molecules
N_Clay(C_Clay, D_Clay) := C_Clay/(ρ_Clay*1/6*π*D_Clay^3)
Λ_Clay(C_Clay, D_Clay) := (ρ_Clay/C_Clay*π*D_Clay^3/6)^(1/3)  # Separation distance between clay particles
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ϕ_Floc.0(C_Al, C_Clay, EN_Chem) :=
    ϕ_Floc.0 ← C_Precipitate(C_Al, EN_Chem)/ρ_AlOH3 + C_Clay/ρ_Clay if EN_Chem == 0
    ϕ_Floc.0 ← C_Precipitate(C_Al, EN_Chem)/ρ_PACl + C_Clay/ρ_Clay otherwise
    return ϕ_Floc.0
p(C, C_0) := -log(C/C_0)
Invp(pC, C_0) := C_0*10^(-pC)  # p functions!
## Fractal functions
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d(D_Fractal, d_0, i) := d_0*2^(i/D_Fractal)
# Diameter of a floc given i doubling collisions
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n(D_Fractal, d_0, d) := D_Fractal*log(d/d_0, 2)  # number of doubling collisions required to produce a floc of a diameter d.
Λ_Floc(C_Al, C_Clay, EN_Chem, D_Fractal, d_0, d) := d_0*(π/(6*ϕ_Floc.0(C_Al, C_Clay, EN_Chem)))^(1/3)*(d/d_0)^(D_Fractal/3)
# Separation distance as a function of floc size.
# Floc volume fraction
ϕ(C_Al, C_Clay, EN_Chem, D_Fractal, d_0, d) := ϕ_Floc.0(C_Al, C_Clay, EN_Chem)*(d/d_0)^(3 - D_Fractal)
ρ_Floc.0(C_Al, C_Clay, EN_Chem) := C_Floc(C_Al, C_Clay, EN_Chem)/ϕ_Floc.0(C_Al, C_Clay, EN_Chem)
# Density of the initial floc made of the primary colloid and nanoglobs.
## Floc density as a function of size
ρ_Floc(C_Al, C_Clay, D_Fractal, d_0, d, EN_Chem, Τ) := ((ρ_Floc.0(C_Al, C_Clay, EN_Chem) - ρ_H2O(Τ))*(d_0/d)^(3 - D_Fractal) + ρ_H2O(Τ))
## Floc terminal velocity
V_t(C_Al, C_Clay, EN_Chem, D_Fractal, d_0, d, Τ) := g*d_0^2/(18*Φ_Floc*ν_H2O(Τ))*(ρ_Floc.0(C_Al, C_Clay, EN_Chem) - ρ_H2O(Τ))/ρ_H2O(Τ)*(d/d_0)^(D_Fractal - 1)
## Floc diameter as a function of terminal velocity
d_fVt(C_Al, C_Clay, EN_Chem, D_Fractal, d_0, V_t, Τ) := d_0*(18*V_t*Φ_Floc*ν_H2O(Τ)/(g*d_0^2)*ρ_H2O(Τ)/(ρ_Floc.0(C_Al, C_Clay, EN_Chem) - ρ_H2O(Τ)))^(1/(D_Fractal - 1))
## Single Collision times for laminar and turbulent flow mediated collisions as a function of floc size
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t_claminar(C_Al, C_Clay, EN_Chem, D_Fractal, d_0, d, ε, Τ) := 1/6*(6/π)^(1/3)*ϕ_Floc.0(C_Al, C_Clay, EN_Chem)^(-2/3)*(ν_H2O(Τ)/ε)^(1/2)*(d/d_0)^(2*D_Fractal/3 - 2)
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t_cturbulent(C_Al, C_Clay, EN_Chem, D_Fractal, d_0, d, ε) := 1/6*(6/π)^(1/9)*ϕ_Floc.0(C_Al, C_Clay, EN_Chem)^(-8/9)*ε^(-1/3)*d^(2/3)*(d/d_0)^(8*(D_Fractal - 3)/9)
## Kolmogorov length scale
η_Kolmogorov(ε, Τ) := (ν_H2O(Τ)^3/ε)^(1/4)
# Size of the floc that has separation distances equal to the Kolmogorov length scale
D_Kolmogorov(C_Al, C_Clay, EN_Chem, d_0, D_Fractal, ε, Τ) := d_0*(1/d_0*(ν_H2O(Τ)^3/ε)^(1/4)*(6*ϕ_Floc.0(C_Al, C_Clay, EN_Chem)/π)^(1/3))^(3/D_Fractal)
# Collision time function based on whether the floc separation distance is greater or less than the Kolmogorov length scale
t_c(C_Al, C_Clay, EN_Chem, D_Fractal, d_0, d, ε, Τ) :=
    t_c ← t_claminar(C_Al, C_Clay, EN_Chem, D_Fractal, d_0, d, ε, Τ) if Λ_Floc(C_Al, C_Clay, EN_Chem, D_Fractal, d_0, d) ≤ η_Kolmogorov(ε, Τ)
    t_c ← t_cturbulent(C_Al, C_Clay, EN_Chem, D_Fractal, d_0, d, ε) otherwise
    return t_c
# Summation of the collion times given an initial colloid size and a final floc size assuming turbulent flow conditions and that collisions are between similarly sized flocs.
# Use this function for turbulent flow reactors to calculate the total time for a sequence of collisions. Γ is the fraction coverage with nanoglobs and hence the fraction of the collisions that are successful.
t_FlocTotal(C_Al, C_Clay, EN_Chem, D_Fractal, d_0, d_Final, ε, Γ, Τ) :=
    n ← n(D_Fractal, d_0, d_Final)
    t ← 0 s
    for i ∈ 0 .. n - 1
        t ← t + t_c(C_Al, C_Clay, EN_Chem, D_Fractal, d_0, d(D_Fractal, d_0, i), ε, Τ)
    return t/Γ
# Use this function for laminar flow reactors to calculate the total time for a sequence of collisions
t_FlocTotalLaminar(C_Al, C_Clay, EN_Chem, D_Fractal, d_0, d_Final, ε, Γ, Τ) :=
    n ← n(D_Fractal, d_0, d_Final)
    t ← 0 s
    for i ∈ 0 .. n - 1
        t ← t + t_claminar(C_Al, C_Clay, EN_Chem, D_Fractal, d_0, d(D_Fractal, d_0, i), ε, Τ)
    return t/Γ
# based on Ian Tse's work with floc size as a function of energy dissipation rate. This is for the average energy dissipation rate in a tube flocculator. It isn't clear how to convert this to the turbulent flow case. Maybe the flocs are mostly experiencing viscous shear. But that isn't clear. Some authors have made the case that floc breakup is due to viscous effects. If that is the case, then the results from the tube flocculator should be applicable to the turbulent case. We will have to account for the temporal and spatial variability in the turbulent energy dissipation rate. The factor of 95 μm is based on the assumption that the ratio of the max to average energy dissipation rate for laminar flow is approximately 2.
D_FlocMaxf(ε_Max) := 95*μm*(W/kg/ε_Max)^(1/3)
ε_Df(D) := ((95 μm)/D)^3*W/kg  # Max Energy dissipation rate as a function of maximum floc diameter.
## Velocity gradient in coiled tubing for lab scale laminar flow flocculators
G_Straight(Q_Plant, ID_Tube) := 64*Q_Plant/(3*π*ID_Tube^3)
# Reynolds number
Re_Rm(Q_Plant, ID_Tube, Τ) := 4*Q_Plant/(π*ID_Tube*ν_H2O(Τ))
# Dean number: A dimensionless parameter that is the unfortunate combination of Reynolds and tube curvature. It would have been better to keep the Reynolds number and define a simple dimensionless geometric parameter.
De(Q_Plant, ID_Tube, R_Coil, Τ) := Re_Rm(Q_Plant, ID_Tube, Τ)*(ID_Tube/(2*R_Coil))^(1/2)
G_Coil(Q_Plant, ID_Tube, R_Coil, Τ) := G_Straight(Q_Plant, ID_Tube)*(1 + 0.033*log(De(Q_Plant, ID_Tube, R_Coil, Τ))^4)^(1/2)
# We need a reference for this. Karen's thesis likely has this equation and the reference.
# Residence time in the tube flocculator.
θ_Tube(ID_Tube, L_Tube, Q_Plant) := L_Tube*π*ID_Tube^2/4/Q_Plant
# Gθ calculated for a coiled tube flocculator.
Gθ(Q_Plant, ID_Tube, R_Coil, L_Tube, Τ) := G_Coil(Q_Plant, ID_Tube, R_Coil, Τ)*θ_Tube(ID_Tube, L_Tube, Q_Plant)
# Surface area to volume ratio for clay normalized by surface area to volume ratio for a sphere
Π_ClaySphere(Π_HD) := (1/2 + Π_HD)*(2/(3*Π_HD))^(2/3)
# Surface area of clay normalized by total surface of clay + reactor walls. This will be used to estimate how much coagulant actually goes to the clay.
Π_AClayATotal(C_Clay, D_Clay, D_Tube, Π_HD) := 1/(1 + 2*D_Clay/(3*D_Tube*Π_ClaySphere(Π_HD)*C_Clay/ρ_Clay))
# Coverage of clay with nanoglobs given loss to the tube flocculator walls and a poisson distribution on the clay given random hits by the nanoglobs. The poisson distribution results in the coverage only gradually approach full coverage as coagulant dose increases.
Γ_Coag(C_Clay, C_Al, EN_Chem, D_Tube, D_Clay, Π_HD) := 1 - exp(-ϕ_Floc.0(C_Al, 0*mg/L, EN_Chem)*D_Clay/(ϕ_Floc.0(0*mg/L, C_Clay, EN_Chem)*D_Coag(EN_Chem))*1/π*Π_AClayATotal(C_Clay, D_Clay, D_Tube, Π_HD)/Π_ClaySphere(Π_HD))
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pC_Viscous(k, ε, Τ, t, C_Al, C_Clay, EN_Chem, d_0, D_Tube) := 3/2*log(2/3*(6/π)^(2/3)*π*k*sqrt(ε/ν_H2O(Τ))*t*Γ_Coag(C_Clay, C_Al, EN_Chem, D_Tube, d_0, Π_HD)*(C_Clay/ρ_Clay)^(2/3) + 1)
pC_Inertial(k, ε, t, C_Al, C_Clay, EN_Chem, d_0, D_Tube) := 9/8*log(8/9*(6/π)^(8/9)*π*k*t*ε^(1/3)/d_0^(2/3)*Γ_Coag(C_Clay, C_Al, EN_Chem, D_Tube, d_0, Π_HD)*(C_Clay/ρ_Clay)^(8/9) + 1)
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# The Kolmogorov concentration is the concentration of particles that have an average separation distance equal to the Kolmogorov length scale.
C_PKolmogorov(ε, Τ, d_0) := π/6*d_0^3*ρ_Clay*(ε/ν_H2O(Τ)^3)^(3/4)
# The Komogorov flocculation time is the time that it takes for a suspension of particles to aggreagate sufficiently so that the separation distance between the small particles is equal to the Kolmogorov length scale.
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t_K(k, ε, Τ, C_Al, C_Clay, EN_Chem, d_0, D_Tube) := 3/(2*π*sqrt(ε/ν_H2O(Τ))*k*Γ_Coag(C_Clay, C_Al, EN_Chem, D_Tube, d_0, Π_HD))*(ρ_Clay*π/6)^(2/3)*(1/C_PKolmogorov(ε, Τ, d_0)^(2/3) - 1/C_Clay^(2/3))
pC_Combined(k, ε, Τ, t, C_Al, C_Clay, EN_Chem, d_0, D_Tube) :=
    C_PK ← C_PKolmogorov(ε, Τ, d_0)
    Γ ← Γ_Coag(C_Clay, C_Al, EN_Chem, D_Tube, d_0, Π_HD)
    t_K ← max(3/(2*π*sqrt(ε/ν_H2O(Τ))*k*Γ)*(ρ_Clay*π/6)^(2/3)*(1/C_PK^(2/3) - 1/C_Clay^(2/3)), 0 s)
    pC ← pC_Viscous(k, ε, Τ, t, C_Al, C_Clay, EN_Chem, d_0, D_Tube) if (t < t_K) and (t_K ≠ 0 s)
    otherwise
        pC ← 9/8*log(8/9*(6/π)^(8/9)*π*k*(t - t_K)*ε^(1/3)/d_0^(2/3)*Γ*(C_PK/ρ_Clay)^(8/9) + 1) + (-log(C_PK/C_Clay)) if (t_K ≠ 0 s)
        pC ← 9/8*log(8/9*(6/π)^(8/9)*π*k*(t - t_K)*ε^(1/3)/d_0^(2/3)*Γ*(C_Clay/ρ_Clay)^(8/9) + 1) if (t_K == 0 s)
    return pC
# This program integrates up to the Kolmogorov length scale using the laminar equations and then integrates to the final time using the turbulent equations.
