# High Flow Rapid Mix
# Bonnie Schiffman and Brooke Pian Spring 2013
# References
# [reference: ExpertInputs.xmcd]
# [reference: MathFunctions.xmcd]
# [reference: PipeDatabase.xmcd]
# [reference: MaterialsDatabase.xmcd]
# [reference: FluidsFunctions.xmcd]
# [reference: CdcFunctions.xmcd]
# [reference: SedimentationTank.xmcd]
# [reference: Flocculator.xmcd]
# [reference: LFOM.xmcd]
# Rapid Mix Culvert and Orifice Areas
Q_Plant := 80*L/s, 81*L/s .. 500*L/s
L_RMChannel := W_EtWalkway - T_PlantWall = 0.85 m
# Rapid Mix channel dimensions assuming a maximum headloss of 5 cm:
HL_ChannelMax = 0.05 m
# The K value includes inflow and outflow expansion, flow through a 90 degree bend, and flow expansion through the micromix orifice. We assume that the K value for the micro-mix apparatus is 2, based on later calculated headloss through micro-mix.
K_RMChannel := K_90 + 2*K_RmLfom + 2 = 4.4
# Derivation for width of Rapid Mix Culvert:
V_channel(HL, K) := sqrt(HL*2*g/K)
fW_RMChannel(Q, HL, K) := sqrt(Q*(K/(HL*2*g))^(1/2))
V_RMChannel := V_channel(HL_ChannelMax, K_RMChannel)
# Comparing RM Channel Dimensions with orifice size if only one micro mix orifice is used for high flow:
A_channel(Q, V) := Q/V
fD_RMOrifice(Q) := D_PipeED(E_MaxRM, Q, Pi_VenaContractaOrifice, Pi_JetRound)
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# Micro-mix Orifice Sheet Functions
# For low flow plants, there is only one orifice with diameter = D.RMOrifice
# Derivation
Q_80 := 80*L/s
# Starting with LFOM orifice diameter
D_RMOrifice(Q) := D_PipeED(E_MaxRM, Q, Pi_VenaContractaOrifice, Pi_JetRound)
HL_Lfom := 20 cm
# For High Flow plants, there are multiple orifices with a minimum diameter D.LFOMOrifice, a minimum spacing S.RMOrificsMin, and a maximum energy dissipation rate 1000 mW/kg
D_LfomOrifices := fD_LfomOrifices(Q_80, HL_Lfom, D_Drill)
D_RMOrifices := D_LfomOrifices
S_RMOrificesMin := S_LfomOrificesMin = 5 mm
# Find Q through each orifice given rapid mix energy dissipation
fN_RMOrifices(E_RM, D_Orifice, Pi_Jet, Pi_VCOrifice, Q_Plant) := 4*Pi_Jet*Q_Plant/(E_RM^(1/3)*D_Orifice^(7/3)*Pi_VCOrifice^(7/6)*π)
fV_RM(E_RM, D_Orifice, Pi_jet, Pi_VCOrifice) := (E_RM*D_Orifice*Pi_VCOrifice^(1/2))^(1/3)/Pi_jet
fS_RMOrifices(W_RMChannel, N_RMOrifices, D_RMOrifices) := (W_RMChannel - sqrt(N_RMOrifices)*D_RMOrifices)/(sqrt(N_RMOrifices) + 1)
V_RMOrifice := fV_RM(E_MaxRM, D_RMOrifices, Pi_JetRound, Pi_VenaContractaOrifice) = 0.81995 m/s
# With variable assumed headloss (so that we can calculate the necessary assumed headloss, should be removed once a HL is established)
fQ_Orifice(V_RM, D_Orifice, Pi_VenaContracta) := V_RM*D_Orifice^2*π*Pi_VenaContracta/4
D_HFRMOrifices(Q_High, HL) :=
    D ← fD_LfomOrifices(Q_High, HL_Lfom, D_Drill)
    S ← 0
    while S < S_RMOrificesMin
        N ← fN_RMOrifices(E_MaxRM, D, Pi_JetRound, Pi_VenaContractaOrifice, Q_High)
        S ← fS_RMOrifices(fW_RMChannel(Q_High, HL, K_RMChannel), N, D)
        D ← D + 1 mm
    D_RMOrifices2 ← D
Q_RMOrifice := fQ_Orifice(V_RMOrifice, D_RMOrifices, Pi_VenaContractaOrifice) = 0.000801607 m^3/s
# Find number of orifices from Q orifice and Q total
N_Or := ceil(Q_80/Q_RMOrifice) = 100
# Condensed function for number of orifices given plant flow rate and orifice diameter
N_HFRMOrifices(Q_High, HL) := fN_RMOrifices(E_MaxRM, D_HFRMOrifices(Q_High, HL), Pi_JetRound, Pi_VenaContractaOrifice, Q_High)
fN_RMOrifices(E_RM, D_Orifice, Pi_Jet, Pi_VCOrifice, Q_Plant) := 4*Pi_Jet*Q_Plant/(E_RM^(1/3)*D_Orifice^(7/3)*Pi_VCOrifice^(7/6)*π)  # disabled
S_HFRMOrifices(Q_High, HL) := fS_RMOrifices(fW_RMChannel(Q_High, HL, K_RMChannel), N_HFRMOrifices(Q_High, HL), D_HFRMOrifices(Q_High, HL))
N_RMOrifices := fN_RMOrifices(E_MaxRM, D_RMOrifices, Pi_JetRound, Pi_VenaContractaOrifice, Q_80) = 99.7996
# Determine if this number of holes will fit in the size of the channel with spacing
# Assume same number of rows and columns in square channel. The width of the channel is the diameter*Nrows + (spaces+1)*Nrows
fS_RMOrifices(W_RMChannel, N_RMOrifices, D_RMOrifices) := (W_RMChannel - sqrt(N_RMOrifices)*D_RMOrifices)/(sqrt(N_RMOrifices) + 1)  # disabled
W_RMChannel := fW_RMChannel(Q_80, HL_ChannelMax, K_RMChannel) = 41.165 cm
S_RMOrifices := fS_RMOrifices(W_RMChannel, N_RMOrifices, D_RMOrifices) = -2.94855 mm  # Too many orifices, don't fit in channel!
# If spacing is the constraint on the number of orifices
S_RMOrificesMin = 0.5 cm
# Micro-mix Orifice Sheet Headloss Analysis
# If we change headloss while keeping flow rate constant, culvert size decreases as allowable headloss increase
HL := .1 cm, .2 cm .. 10 cm
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# Assuming 5 cm headloss:
Q_Plant := 80*L/s, 81*L/s .. 500*L/s
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# Finding Headloss and K through MicroMix Orifice Sheet
# Headloss through micro-mix as a function of assumed headloss and plant flow rate
HL_RMOrifices(Q, HL) := h_e(Q/N_HFRMOrifices(Q, HL), D_HFRMOrifices(Q, HL), K_Exp)
# Headloss through each orifice is the same; total headloss is sum of headloss in series
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# Calculating K assuming HL= K (v2/2g) and velocity used is the Vout in the entire channel
V_RMOrifice = 0.81995 m/s  # for 80 L/s plant and 5cm HL total
HL_80 := HL_RMOrifices(Q_80, 5 cm)
K_RMOrifice(Q, HL) := HL_RMOrifices(Q, HL)*2*g/V_channel(HL, K_RMChannel)^2
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# Our assumption that K=2 was correct!
# Variable Assumed Headloss
# Space between orifices is much smaller than orifice diameters, so vena contracta will be lower than anticipated and less expansion will occur.
# For an 80 L/s plant: as we decrease the initial assumed headloss, channel size increases, orifice diameter decreases, and spaces and diameters become closer in size. Therefore, a lower headloss and larger culvert might be more effective for rapid mix. A larger culvert might also allow for lower velocity and more cross-sectional mixing.
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# Porosity
# Area in (jets) v. area out (channel)
A_HFin(Q, HL) := Pi_VenaContractaOrifice*N_HFRMOrifices(Q, HL)*(π/4*D_HFRMOrifices(Q, HL)^2)
A_HFout(Q, HL) := fW_RMChannel(Q, HL, K_RMChannel)^2
Π_Area(Q, HL) := A_HFin(Q, HL)/A_HFout(Q, HL)
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# Porosity is a little less than half - expected.
# Culvert Width
fW_RMChannel(Q_80, 5 cm, K_RMChannel) = 41.165 cm
W_RM2 := fW_RMChannel(Q_80, 2 cm, K_RMChannel) = 0.517622 m
(fW_RMChannel(Q_80, 2 cm, K_RMChannel) - fW_RMChannel(Q_80, 5 cm, K_RMChannel))/fW_RMChannel(Q_80, 5 cm, K_RMChannel) = 0.257433
# Culvert size increases by 25% as headloss decreases from 5cm to 2cm
# Orifice Diameter
D_HFRMOrifice2 := D_HFRMOrifices(Q_80, 2 cm) = 1.78937 in
# Orifice Diameter and Spacing Ratio
S_HFRMOrifices(Q_80, 2 cm) = 0.27586 in
Π_Spacing2 := S_HFRMOrifices(Q_80, 2 cm)/D_HFRMOrifices(Q_80, 2 cm) = 0.154166
# Low Headloss to improve spacing and expansion
# Drawing Micro-mix Orifice Sheet
# NEEDS CONTINUED WORK
RMChannelLayer := layer_new("EtLfomPlu", blue)
L_RMVertPipe := L_RMVertPipeTop + L_LfomPipe + L_RMVertPipeBottom
RMVertPipe := PipeF([LFOM_Origin[0]; LFOM_Origin[1]; LFOM_Origin[2] - L_RMVertPipeBottom], L_RMVertPipe, [0; 90; 0]*deg, ND_RMPipe, PS_Default)
FreezeLfomLayer := FreezeLayer("EtLfomPlu")
SelectLfom := SelectLayer("EtLfomPlu")
LfomOrifices :=
    Local ← FreezeLfomLayer
    for h ∈ 0 .. last(H_LfomOrifices)
        if N_LfomOrifices[h] ≠ 0
            Local ← stack(Local, CylinderF([LFOM_Origin[0]; LFOM_Origin[1]; LFOM_Origin[2] + H_LfomOrifices[h]], D_LfomOrifices/2, outerradius(ND_RMPipe) + zc, [
                90 deg + (asin(0.5*S_LfomOrificesMin/(2*outerradius(ND_RMPipe))) + asin(D_LfomOrifices/(2*outerradius(ND_RMPipe))))*(mod(h, 2) == 0);
                0 deg
            ]))
        Local ← stack(Local, ArrayLastPolar([LFOM_Origin[0]; LFOM_Origin[1]; LFOM_Origin[2] + H_LfomOrifices[h]], N_LfomOrifices[h], (N_LfomOrifices[h] - 1)*(2*asin(D_LfomOrifices/(2*outerradius(ND_RMPipe))) + 2*asin(S_LfomOrificesMin/(2*outerradius(ND_RMPipe)))))) if N_LfomOrifices[h] > 1
    return Local
SubtractRMPipeOrifices := SubtractF(["EtLfomPlu"], "DeleteMe")
L_RMVertPipeTop := H_PlantFreeboard
AC_LFOM := stack(LfomLayer, RMVertPipe, FreezeLfomLayer, GroupAll("DeleteMe"), SubtractRMPipeOrifices, SelectLfom, LfomOrifices, GroupAll("DeleteMe"), SubtractRMPipeOrifices)
# Micro-mix Gate
# PVC pipe gate - assuming no vena contracta effect
ε_RMGate := 0.5
K_RMChannelG := K_90 + 2*K_RmLfom + 1 = 3.4  # K through gate is 1, lower than through orifice sheet
W_HFRMChannel(Q) := fW_RMChannel(Q, 5 cm, K_RMChannelG)
E_RMMax == (Pi_Jet*V_Jet)^3/D_Jet
A_RMChannel(Q) := W_HFRMChannel(Q)^2
V_Jet == V_RMGate == 2*V_RMChannel
A_RMPipes(Q) := ε_RMGate*A_RMChannel(Q)
# Assuming no vena contracta with curved surface (pipes) as gate
K_RMGateVin := (1 - A_RMPipes(80*L/s)/A_RMChannel(80*L/s))^2 = 0.25
# Porosity is always 50% so K is always the same (0.25) when using velocity through gate (double channel velocity)
S_RMGate == D_Jet
V_RMChannel = 0.4721 m/s  # Velocity does not change with plant flow rate, only with K and HL which are constant
V_RMGate := 1/ε_RMGate*V_RMChannel = 0.9442 m/s
HL_RMGate := V_RMGate^2/(2*g)*K_RMGateVin = 1.13636 cm
K_RMGate := HL_RMGate*2*g/V_RMChannel^2 = 1  # Our assumption was right, K = 1 through gate
ED_RM := 1*m^2/s^3, 1.1*m^2/s^3 .. 5*m^2/s^3
S_RMGate(ED) := (Pi_JetPlane*V_RMGate)^3/ED  # Space between each pipe does not change with flow rate!
S_RMGate(1*m^2/s^3) = 0.958825 cm
N_SpacesRMGate(Q, ED) := floor(A_RMPipes(Q)/(W_HFRMChannel(Q)*S_RMGate(ED)))  # Area of spaces = area of pipes
N_PipesRMGate(Q, ED) := floor(N_SpacesRMGate(Q, ED) - 1)
D_PipesRMGate(Q, ED) := A_RMPipes(Q)/(W_HFRMChannel(Q)*N_PipesRMGate(Q, ED))
# If we increase energy dissipation rate:
D_PipesRMGate(80*L/s, 1*m^2/s^3)/D_PipesRMGate(80*L/s, 1.5*m^2/s^3) = 1.52632
D_PipesRMGate(80*L/s, 1*m^2/s^3) = 1.01567 cm
Q_HFPlant := 80*L/s, 81*L/s .. 500*L/s  # Higher energy dissipation rates will lower pipe diameters exponentially
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# If using aluminum:
A_RMin(Q) := ε_RMGate*W_HFRMChannel(Q)^2
# Velocity through the spaces is half, but the vena contracta allows for more space between bars to allow for A.in/A.out = 0.5
ε_RM := 1*m^2/s^3, 1.1*m^2/s^3 .. 5*m^2/s^3
S_RMGateB(ED) := (Pi_JetPlane*V_RMGate)^3/(ED*sqrt(Pi_VCBaffle))  # Space between each pipe is larger because D.jet includes vena contracta
S_RMGateB(1*m^2/s^3) = 1.54044 cm
N_SpacesRMGateB(Q, ED) := floor(A_RMin(Q)/(W_HFRMChannel(Q)*S_RMGate(ED)))
# We use spacing without accounting for the vena contracta to find the number of spaces needed, and then including the added space available in the diameter calcluation
N_BarsRMGate(Q, ED) := floor(N_SpacesRMGateB(Q, ED) - 1)
D_BarsRMGate(Q, ED) := (W_HFRMChannel(Q) - (S_RMGateB(ED)*N_SpacesRMGateB(Q, ED)))/N_BarsRMGate(Q, ED)
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(D_PipesRMGate(Q_80, 1*m^2/s^3) - D_BarsRMGate(Q_80, 1*m^2/s^3))/D_PipesRMGate(Q_80, 1*m^2/s^3) = 0.596506
# The bars are about 60% the size of the pipes.
# Drawing Orifice Sheet Functions
OrificeSheetMultF(LayerName, LayerColor, Origin, Dim, D_Orifices, S_Orifices, H_Orifices, N_Orifices, AngleVec) :=
    Layer ← layer_new(LayerName, LayerColor)
    Sheet ← BoxF(Origin, Origin + Dim, AngleVec)
    Freeze ← FreezeLayer(LayerName)
    for h ∈ 0 .. last(H_Orifices)
        Freeze ← stack(Freeze, CylinderF([Origin[0] + Dim[0]; Origin[1] + D_Orifices/2 + S_Orifices; Origin[2] + H_Orifices[h]], D_Orifices/2, Dim[0], AngleVec)) if N_Orifices[h] ≠ 0
        Freeze ← stack(Freeze, ArrayLast(1, N_Orifices[h], D_Orifices + S_Orifices)) if N_Orifices[h] > 1
    SubtractOrifices ← SubtractF([LayerName], "DeleteMe")
    return stack(Layer, Sheet, Freeze, GroupDelete, SubtractOrifices)
OrificeSheet1F(LayerName, LayerColor, Origin, Dim, D_Orifice, AngleVec) :=
    Layer ← layer_new(LayerName, LayerColor)
    Sheet ← BoxF(Origin, Origin + Dim, AngleVec)
    Freeze ← FreezeLayer(LayerName)
    DrawJet ← CylinderF([Origin[0] + Dim[0]; Origin[1] + Dim[1]/2; Origin[2] + (Dim[2]/2)], D_Orifice/2, Dim[0], AngleVec)
    SubtractOrifice ← SubtractF([LayerName], "DeleteMe")
    return (Layer, Sheet, Freeze, DrawJet, GroupDelete, SubtractOrifice)
