# Influent Sed Manifold Program
# The purpose of this program is to check the design of the sedimentation tank influent manifold and to determine the effect of the ratio of the Manifold to the total port area. Conventional design guidelines suggested a area ratio of 4, but that forces us to use a very large manifold with the likely consequence that more flocs will settle in the manifold. In addition a large manifold will limit the length of our sed tanks or will require the sed tanks to be deeper.
W_SedInlet := W_SedBay/2 - W_SedSludgeFlat/2 - T_SedInletSlope*sin(AN_SedTopInlet)
Q_SedSlopePort := V_SedUpBod*W_SedInlet*W_SedSlopePlate
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# This calculates the area of the Sed port that will have the given energy dissipation rate needed not to break up the flocs.
B_SedPort := sqrt(A_Port(Pi_FlocDissipation, K_PipeEnt, Q_SedSlopePort, ED_SedInlet, Pi_VenaContractaOrifice))
# Ports are assumed square here.
L_SedPort := B_SedPort/sin(AN_SedTopInlet)  # The cut length is adjusted for the angle of the plate.
W_SedPort := B_SedPort  # Width is set to make the smallest area the water travels through square.
A_SedPort := B_SedPort*W_SedPort  # Port Area
# The following program estimates the head required to provide the flow through the ports and then calculates the flow through every port while keeping track of the changes in the hydraulic grade line.  It then compares the calculated total flow to the desired manifold flow and applies a correction factor
# and then recalculates.
# These Collapsed areas contain functions that  calculate the array of port flows down the length of the manifold and based on these the maximum length the sed tank can be based on a given manifold area.
# From the graph in "Influent sed manifold design model" it can be seen that the Pi.SedArea ratio term should be some where between 1.5 and 2 in order to get about an 85 to 90% flow ratio.
Q_SedSlopePorts(A_SedManifold, V_SedUpBod, W_SedInlet, L_Sed, Pi_SedCell, K_PipeEnt, W_SedSlopePlate, ED_FlocLarge, Pi_VenaContractaOrifice, Nu_Water, E_Concrete) :=
    n_Ports ← floor(L_Sed/W_SedSlopePlate)
    Q_SedSlopePort ← V_SedUpBod*W_SedInlet*W_SedSlopePlate
    A_Port ← A_Port(Pi_SedCell, K_PipeEnt, Q_SedSlopePort, ED_FlocLarge, Pi_VenaContractaOrifice)
    Q_SedInlet ← V_SedUpBod*W_SedInlet*L_Sed
    D_Manifold ← D_circle(A_SedManifold)
    V[0] ← Q_SedInlet/A_SedManifold
    Q_m[0] ← Q_SedInlet
    H_m[0] ← 1/(2*g)*(Q_SedInlet/(n_Ports*Pi_VenaContractaOrifice*A_Port))^2 - V[0]^2/(2*g)
    maxerror ← 0.00001
    error ← 1
    while error > maxerror
        for i ∈ 0 .. n_Ports - 1
            Q_p[i] ← Pi_VenaContractaOrifice*A_Port*sqrt(2*g*H_m[i])
            V[i + 1] ← max(V[i] - Q_p[i]/A_SedManifold, 0.000000001*m/s)
            Q_m[i + 1] ← A_SedManifold*V[i + 1]
            ΔH_Exp ← (V[i] - V[i + 1])*V[i + 1]/g
            H_m[i + 1] ← H_m[i] + V[i]^2/(2*g) - V[i + 1]^2/(2*g) + ΔH_Exp - h_f(Q_m[i + 1], D_Manifold, W_SedSlopePlate, Nu_Water, E_Concrete)
        error ← ((Q_SedInlet/sum(Q_p))^2 - 1)^2
        H_m[0] ← H_m[0]*(Q_SedInlet/sum(Q_p))^2
    return Q_p
# pressure recovery dominates the flow in the manifold and thus to get a decent initial prediction of the required head at the beginning of the manifold we subtract the velocity head. This ends up giving a very good first guess.
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# Port velocity head term - manifold velocity head term
# This prevents the flow from every going backwards in the manifold. When the correct initial head is attained this minimum flow won't be applied anymore. It is needed if the initial head is too low.
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# Use major losses only in manifold
L_MaxSed(A_SedManifold, V_SedUpBod, W_SedBay, Π_SedCell, K_PipeEnt, W_SedSlopePlate, ED_FlocLarge, Pi_FlowManifold, Pi_VenaContractaOrifice, Nu_Water, E_Concrete) :=
    Pi_SedArea ← 2
    Q_SedSlopePort ← V_SedUpBod*W_SedBay/2*W_SedSlopePlate
    A_Port ← A_Port(Π_SedCell, K_PipeEnt, Q_SedSlopePort, ED_FlocLarge, Pi_VenaContractaOrifice)
    L_Sed ← A_SedManifold/A_Port*W_SedSlopePlate/Pi_SedArea
    Q_Ports ← Q_SedSlopePorts(A_SedManifold, V_SedUpBod, W_SedInlet, L_Sed, Π_SedCell, K_PipeEnt, W_SedSlopePlate, ED_FlocLarge, Pi_VenaContractaOrifice, Nu_Water, E_Concrete)
    Pi_FlowActual ← min(Q_Ports)/max(Q_Ports)
    maxerror ← 0.01
    error ← 1
    iteration ← 0
    L_SedNew ← L_Sed
    while error > maxerror
        iteration ← iteration + 1
        L_Sed ← L_SedNew
        Q_Ports ← Q_SedSlopePorts(A_SedManifold, V_SedUpBod, W_SedInlet, L_Sed, Π_SedCell, K_PipeEnt, W_SedSlopePlate, ED_FlocLarge, Pi_VenaContractaOrifice, Nu_Water, E_Concrete)
        Pi_FlowActual ← min(Q_Ports)/max(Q_Ports)
        error ← |(Pi_FlowActual - Pi_FlowManifold)/(Pi_FlowActual + Pi_FlowManifold)|
        L_SedNew ← L_Sed*(Pi_FlowActual/Pi_FlowManifold)^1
        trace("For iteration {0}, Pi.FlowActual = {1}, L.Sed={2}, L.SedNew={3}", iteration, Pi_FlowActual, L_Sed, L_SedNew)
    return L_SedNew  # intial guess on area ratio
# First assume area ratio of 2, to get initial length of sed tank. Then calculate Pi.FlowManifold and iterate to converge on the target Pi.FlowManifold.
# It is important that this max error be less stringent than the function that it calls (Q.Ports), otherwise this function will oscillate.
# The power relationship was a guess based on trial and error. Higher powers tended to overshoot the solution.
# The trace line can be used to print intermediate results from the loop to see if it is converting (Debug option)
# This is the inside height dimension because it is based on the inside width dimension.
H_SedSlopeManifold := (tan(AN_SedTopInlet) - tan(AN_SedBottomInlet))*W_SedInlet  # Why is the other height being subtracted??
A_SedInletManifold := H_SedSlopeManifold*W_SedInlet/2  # Area of the inlet manifold determined by geometry
L_SedMax := L_MaxSed(A_SedInletManifold, V_SedUpBod, W_SedInlet, Pi_SedCell, K_PipeEnt, W_SedSlopePlate, ED_SedInlet, Pi_FlowManifold, Pi_VenaContractaOrifice, Nu_Water, E_Concrete)
Q_Sed := Q_Plant/N_SedTanks
L_SedTotal := Q_Plant/(V_SedUpBod*W_SedBay)  # This is the total length of a single valley (or cell) sed tank
N_SedBaysTotal := ceil(L_SedTotal/L_SedMax)  # This is the total number of bays required for the entire plant (not the number per sed tank!)
N_SedBaysMin := ceil(N_SedBaysTotal/N_SedTanks)
N_SedBays := max(N_SedBaysMin, N_SedBaysEst)  # Number of pairs of slopes per sedimentation tank.
L_Sed := Q_Sed/(W_SedBay*N_SedBays*V_SedUpBod)
N_SedPorts := floor(L_Sed/W_SedSlopePlate)
W_Sed := N_SedBays*W_SedBay
W_SedInlet := W_SedBay/2 - W_SedSludgeFlat/2 - T_SedInletSlope*sin(AN_SedTopInlet) - T_ChannelWall*(N_SedBays - 1)/(2*N_SedBays)
# W.SedInlet is redefined to be accurate for the width loss from adding
# dividing walls between adjacent slope pairs.
Q_SedManifold := Q_Sed/(2*N_SedBays)
Q_SedBay := Q_Sed/N_SedBays
L_SedSlopeManifold := W_SedInlet/cos(AN_SedTopInlet)
W_SedSlopePlateRemaining := L_Sed - N_SedPorts*W_SedSlopePlate  # This is the extra space left at the end of the sed tank that will not fit another slope plate
W_SedBayActual := (W_Sed - (N_SedBays - 1)*T_ChannelWall)/N_SedBays
W_SedInletBottom := W_SedBayActual/2 - W_SedDrainCover/2
