# Inlet Channel Design
# [reference: MasterProgram.xmcd]
# Length of the Inlet Channel
L_Channel := N_SedTanks*W_Sed + (N_SedTanks + 1)*T_PlantWall
# This sets the hieght of hte water in the channel to be the equal to the ledge that the lamella are sitting on.
A_InletChannel := A_Port(Pi_FlocDissipation, K_LTurn90, Q_Plant, ED_SedInlet, Pi_VenaContractaOrifice)
HW_InletChannel := sqrt(A_InletChannel)  # Height of the water in the Inlet Channel
# The length is based on the side of the sed tank
W_InletChannelED := HW_InletChannel
A_SedManifoldEntrance := A_Port(Pi_FlocDissipation, K_PipeEnt, Q_SedManifold, ED_SedInlet, Pi_VenaContractaOrifice)
L_SedManifoldEntrance := W_SedInlet = 0.442609 m
W_SedManifoldEntrance := A_SedManifoldEntrance/L_SedManifoldEntrance
W_InletChannel := max(W_InletChannelED, W_SedManifoldEntrance + 2*T_SedManifoldEntrance) = 0.780937 m
W_SedManifoldPort := W_SedInlet - 2*T_SedManifoldEntrance
H_SedManifoldPort := A_SedManifoldEntrance/W_SedManifoldPort
H_InletChannel := HW_InletChannel + H_PlantFreeboard = 0.880937 m
# The width of the channel is based on the necessity to be at least as great as the width determined with G, but also must be wide enough to fit sed inlet pipes.  This W.channel chooses the larger choice to fulfill both needs.
