# Linear Flow Orifice Meter Design File
# Created by Adam Salwen (abs265@cornell.edu)
# Modified by Andrew Smith (abs249@cornell.edu) - Spring 2012
# Overview and design goals
# The linear flow orifice meter was developed in 2008 by the AguaClara team at Cornell University in Ithaca, NY. It maintains a linear relationship between the height of water in the entrance tank and the overall plant flow rate, allowing an operator to easily determine how much water is flowing through the plant at any given time. This task is accomplished by mimicking the theoretical stout weir, as will be described below.
#
# The LFOM made possible the development of an automatic chemical dose controller. This device utilizes the linear relationship between height and flow rate provided by the LFOM, and automatically doses the proper amount of coagulant to water leaving the entrance tank. This eliminates the variability in chemical doses which was previously attributed to plant operators.
#
# Below, we describe the algorithm which designs the AguaClara LFOM and then develop this algorithm using MathCAD code. This code will be integrated into the design tool and used to design LFOM's for all future AguaClara plants.
# References and constants/variables needed for design
## References - used for design/testing purposes only, will be deleted
# [reference: BasicInputs.xmcd]
# [reference: ExpertInputs.xmcd]
# [reference: MathFunctions.xmcd]
# [reference: PipeDatabase.xmcd]
# [reference: FluidsFunctions.xmcd]
# Note that this no longer needs to know how many rows are in the LFOM because it calculates that.
# Thus that parameter can be deleted from expert inputs. SImilarly H.dmax has been eliminated in favor of HL.Lfom.
# LFOM Orifice: D.LfomOrifice refers to the diameter of a single orifice
# ND.LfomPipe refers to the nominal diameter of the pipe
# H.DMax is taken as the distance between the bottom of the bottom row of orifices to the limit of the linear relationship between flow and height
# LFOM riser pipe diameter calculation
## Stout weir overview/calculation of proportionality coefficient
# A stout weir is a theoretical flow control device in which weir width is proportional to 1/sqrt(height).
# It is not physically possible to fabricate such a device because the base would be infinitely wide. In practice, the sutro weir serves as a constructable alternative to the stout. As the sutro weir does, we will use a modified version of the stout equation to model flow through the LFOM:
# W(z) = α/sqrt(z) = α*basicW(z).
# in which W is the weir width, calculated as a function of height
# z is the height, with zero defined at the base of the weir
# Alpha is found by first solving for the theoretical maximum flow through the LFOM:
# flow(height)= Pi_VenaContractaOrifice*integral(sqrt(2*g*(height - z))*1/sqrt(z), z = 0 .. height)
# And then dividing the actual flow, Q.Plant by this metric. This will give alpha, which is the coefficient of proportionality
Q_Sutro(HL_Lfom) := sqrt(2*g)*Pi_VenaContractaOrifice*integral(sqrt(HL_Lfom - z)*1/sqrt(z), z = 0 .. HL_Lfom)
# theoretical flow rate predicted by stout equation
α_LfomPipe(Q_Plant, HL_Lfom) := Q_Plant/Q_Sutro(HL_Lfom)  # coefficient of proportionality between LFOM and sutro weir
W_LfomPipe(HL_Lfom, z) := 1/Q_Sutro(HL_Lfom)*1/sqrt(z)  # Width of LFOM opening area as a function of height (per unit flow!!!)
# This equation states that the open area corresponding to one row can be set equal to two orifices of diameter=row height. If there are more than two orifices per row at the top of the LFOM then there are more orifices than are convenient to drill and more than necessary for good accuracy. Thus this relationship can be used to increase the spacing between the rows and thus increase the diameter of the orifices.
# This spacing function also sets the lower range on the LFOM with no accurate flows below a depth equal to the first row height.
W*B_LfomRows == 2*π*B_LfomRows^2/4
fB_LfomRows(Q_Plant, HL_Lfom) := max(min(Round(4*(W_LfomPipe(HL_Lfom, HL_Lfom)*Q_Plant)/(2*π), 1 cm), 5 cm), 2 cm)  # Center-to-center spacing between LFOM rows
## Calculation of average velocity in LFOM riser pipe
# Average velocity at the bottom of the riser pipe is calculated by weighting the velocity of falling water from each height sqrt(2*g*height) by the amount of flow at that height, and then dividing by Q_Plant (this is done so that the calculated total flow from the LFOM is not greater than Q_Plant)
# Note that the speed of falling water is 0.841 m/s for all linear flow orifice meters of height 20cm, regardless of total plant flow rate. Even for flow rates as low as 3 L/s, we get a percent error of less than 2%. This makes sense given that all flows are scaled by Q.Plant, regardless of how Q.Plant is defined.
V_LfomPipe.Avg(HL_Lfom) := 2*g*Pi_VenaContractaOrifice*integral(sqrt(z*(HL_Lfom - z))*W_LfomPipe(HL_Lfom, z), z = 0 m .. HL_Lfom)
V_LfomPipe.Avg(HL_Lfom) = 0.840582 m/s
## Final calculation of LFOM riser pipe diameter
# Average velocity at the bottom of the LFOM riser pipe must be slightly greater than what is given by Q.Plant/Area, so we apply a safety factor and solve for the minimum allowable LFOM cross-sectional area and diameter. This safety factor is given in expert inputs.
# Also, PVC pipes only come in certain sizes, so we must round up to the nearest available pipe size. This could result in an implicit addition to the given safety factor.
A_LfomPipeMin(Q_Plant, HL_Lfom) := Π_LfomSafety*Q_Plant/V_LfomPipe.Avg(HL_Lfom)
fND_LfomPipe(Q_Plant, HL_Lfom, PS_Default) := NominalDiameter(2*sqrt(A_LfomPipeMin(Q_Plant, HL_Lfom)/π), PS_Default)
# Nominal pipe diameter corresponding to the calculated minimum diameter
# Rapid mix pipe and LFOM pipe must be the same size
# LFOM orifice diameter calculation
# The top row of orifices controls the rest of the design. We must ensure that the orifice area in the top row is smaller than the theoretical stout weir area, so that at least one orifice can be placed there.
A_LfomOrificesTop(Q_Plant, HL_Lfom) := Q_Plant*integral(W_LfomPipe(HL_Lfom, z), z = HL_Lfom - fB_LfomRows(Q_Plant, HL_Lfom) .. HL_Lfom)
D_LfomOrificesTopMax(Q_Plant, HL_Lfom) := 2*sqrt(A_LfomOrificesTop(Q_Plant, HL_Lfom)/π)
fD_LfomOrifices(Q_Plant, HL_Lfom, D_Drill) := FloorNearest(min(fB_LfomRows(Q_Plant, HL_Lfom), D_LfomOrificesTopMax(Q_Plant, HL_Lfom)), D_Drill)
# Keep orifices as large as possible to make LFOM construction easier
fD_LfomOrifices(Q_Plant, HL_Lfom, D_Drill) = 1.75 in
A_LfomOrifices(Q_Plant, HL_Lfom, D_Drill) := π*(fD_LfomOrifices(Q_Plant, HL_Lfom, D_Drill)/2)^2
# Generation of array containing LFOM orifice locations
S_LfomOrificesMin := 5 mm  # New expert input to ensure orifices aren't too close
N_LfomOrificesperRowMax(Q_Plant, HL_Lfom, D_Drill, PS_Default) := floor(π*fND_LfomPipe(Q_Plant, HL_Lfom, PS_Default)/(fD_LfomOrifices(Q_Plant, HL_Lfom, D_Drill) + S_LfomOrificesMin))
# A bound on the number of orifices allowed in each row.  The distance between consecutive orifices must be enough to retain structural integrity of the pipe
N_LfomOrificesperRowMax(Q_Plant, HL_Lfom, D_Drill, PS_Default) = 19
# locations where we will try to get the target flows is in between orifices at elevation Pi.H
ramp(start, interval, range)
Q_ramp(Q_Plant, HL_Lfom) := ramp(fB_LfomRows(Q_Plant, HL_Lfom), fB_LfomRows(Q_Plant, HL_Lfom), HL_Lfom)/HL_Lfom*Q_Plant  # Target riser flows
Q_ramp(Q_Plant, HL_Lfom) = [8; 16; 24; 32] L/s
fH_LfomOrifices(Q_Plant, HL_Lfom, D_Drill) := ramp(fD_LfomOrifices(Q_Plant, HL_Lfom, D_Drill)/2, fB_LfomRows(Q_Plant, HL_Lfom), HL_Lfom)
# Calculate the flow for a given number of submerged rows of orifices
Q_LfomActual(Q_Plant, HL_Lfom, D_Drill, RowIndexSubmerged, n_Lfomorifices) :=
    Q ← 0*L/min
    D_LfomOrifices ← fD_LfomOrifices(Q_Plant, HL_Lfom, D_Drill)
    for i ∈ 0 .. RowIndexSubmerged
        Q ← Q + n_Lfomorifices[i]*Q_orificeV(D_LfomOrifices, ramp(fB_LfomRows(Q_Plant, HL_Lfom), fB_LfomRows(Q_Plant, HL_Lfom), HL_Lfom)[RowIndexSubmerged] - ramp(D_LfomOrifices/2, fB_LfomRows(Q_Plant, HL_Lfom), HL_Lfom)[i], Pi_VenaContractaOrifice)
    return Q
# Calculate number of orifices at each level given a diameter
fN_LfomOrifices(Q_Plant, HL_Lfom, D_Drill, PS_Default) :=
    Q_ramplocal ← Q_ramp(Q_Plant, HL_Lfom)
    D_LfomOrifices ← fD_LfomOrifices(Q_Plant, HL_Lfom, D_Drill)
    H_ramplocal ← ramp(D_LfomOrifices/2, fB_LfomRows(Q_Plant, HL_Lfom), HL_Lfom)
    n[last(H_ramplocal)] ← 0
    for i ∈ 0 .. last(H_ramplocal)
        n[i] ← min(max(0, round((Q_ramplocal[i] - Q_LfomActual(Q_Plant, HL_Lfom, D_Drill, i, n))/Q_orificeV(D_LfomOrifices, ramp(fB_LfomRows(Q_Plant, HL_Lfom), fB_LfomRows(Q_Plant, HL_Lfom), HL_Lfom)[i] - ramp(D_LfomOrifices/2, fB_LfomRows(Q_Plant, HL_Lfom), HL_Lfom)[i], Pi_VenaContractaOrifice))), N_LfomOrificesperRowMax(Q_Plant, HL_Lfom, D_Drill, PS_Default))
    return n
# This function calculates the error of the design based on the differences between the predicted flow rate and the actual flow rate through the LFOM.
Q_LfomError(Q_Plant, HL_Lfom, D_Drill, PS_Default) :=
    N_LfomOrifices ← fN_LfomOrifices(Q_Plant, HL_Lfom, D_Drill, PS_Default)
    for j ∈ 0 .. last(N_LfomOrifices)
        Q_LfomError[j] ← (Q_LfomActual(Q_Plant, HL_Lfom, D_Drill, j, N_LfomOrifices) - Q_ramp(Q_Plant, HL_Lfom)[j])/Q_Plant
    return Q_LfomError
# This funciton returns the maximum error, the absolute value of the errors is take into account positive and negative errors.
Q_LfomErrorMax := max(sqrt(Q_LfomError(Q_Plant, HL_Lfom, D_Drill, PS_Default)^2)) = 1.02747 %
H_Graph := 0 cm, 0.5 cm .. HL_Lfom
Q_LfomIdeal(Q_Plant, HL_Lfom, H) := Q_Plant*H/HL_Lfom
Q_Lfom(Q_Plant, HL_Lfom, D_Drill, PS_Default, H) :=
    D_LfomOrifices ← fD_LfomOrifices(Q_Plant, HL_Lfom, D_Drill)
    H_Submerged ← H - ramp(D_LfomOrifices/2, fB_LfomRows(Q_Plant, HL_Lfom), HL_Lfom)
    N_LfomOrifices ← fN_LfomOrifices(Q_Plant, HL_Lfom, D_Drill, PS_Default)
    D_LfomOrifices ← fD_LfomOrifices(Q_Plant, HL_Lfom, D_Drill)
    for i ∈ 0 .. last(H_Submerged)
        Q ← Q + Q_orificeV(D_LfomOrifices, H_Submerged[i], Pi_VenaContractaOrifice)*N_LfomOrifices[i]
    return Q
Q_Plant := 20*L/s
# delete this before using with code!
# Delete graph too to speed up computation.
N_LfomOrifices := fN_LfomOrifices(Q_Plant, HL_Lfom, D_Drill, PS_Default) = [17; 5; 5; 5; 3; 4]
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H_LfomOrifices := fH_LfomOrifices(Q_Plant, HL_Lfom, D_Drill) = [1.27; 4.27; 7.27; 10.27; 13.27; 16.27] cm
B_LfomRows := fB_LfomRows(Q_Plant, HL_Lfom) = 3 cm
ND_LfomPipe := fND_LfomPipe(Q_Plant, HL_Lfom, PS_Default)
ND_RMPipe := ND_LfomPipe = 10 in
D_LfomOrifices := fD_LfomOrifices(Q_Plant, HL_Lfom, D_Drill) = 1 in
ND_LfomPipe := fND_LfomPipe(Q_Plant, HL_Lfom, PS_Default) = 10 in
