# Linear Flow Orifice Meter Design File
# Created by Adam Salwen (abs265@cornell.edu)
# Modified by Andrew Smith (abs249@cornell.edu) - Spring 2012
# Overview and design goals
# The linear flow orifice meter was developed in 2008 by the AguaClara team at Cornell University in Ithaca, NY. It maintains a linear relationship between the height of water in the entrance tank and the overall plant flow rate, allowing an operator to easily determine how much water is flowing through the plant at any given time. This task is accomplished by mimicking the theoretical stout weir, as will be described below.
#
# The LFOM made possible the development of an automatic chemical dose controller. This device utilizes the linear relationship between height and flow rate provided by the LFOM, and automatically doses the proper amount of coagulant to water leaving the entrance tank. This eliminates the variability in chemical doses which was previously attributed to plant operators.
#
# Below, we describe the algorithm which designs the AguaClara LFOM and then develop this algorithm using MathCAD code. This code will be integrated into the design tool and used to design LFOM's for all future AguaClara plants.
# References and constants/variables needed for design
## References - used for design/testing purposes only, will be deleted
# [reference: BasicInputs.xmcd]
Q_Plant := 75*L/s
# [reference: ExpertInputs.xmcd]
# It would be possible to reduce the number of holes by increasing the spacing between rows for high flow plants.
# [reference: MathFunctions.xmcd]
# [reference: PipeDatabase.xmcd]
# [reference: FluidsFunctions.xmcd]
## Variables needed for design - many taken from basic/expert inputs
B_LfomRows := H_dmax/Π_Lfomorifice = 2 cm  # Center-to-center spacing between LFOM rows
# LFOM Orifice: D.LfomOrifice refers to the diameter of a single orifice
# ND.LfomPipe refers to the nominal diameter of the pipe
# H.DMax is taken as the distance between the bottom of the bottom row of orifices to the limit of the linear relationship between flow and height
# LFOM riser pipe diameter calculation
## Stout weir overview/calculation of proportionality coefficient
# A stout weir is a theoretical flow control device in which weir width is proportional to 1/sqrt(height).
# It is not physically possible to fabricate such a device because the base would be infinitely wide. In practice, the sutro weir serves as a constructable alternative to the stout. As the sutro weir does, we will use a modified version of the stout equation to model flow through the LFOM:
# W(z) = α/sqrt(z) = α*basicW(z).
# in which W is the weir width, calculated as a function of height
# z is the height, with zero defined at the base of the weir
# Alpha is found by first solving for the theoretical maximum flow through the LFOM:
# flow(height)= Pi_VenaContractaOrifice*integral(sqrt(2*g*(height - z))*1/sqrt(z), z = 0 .. height)
# And then dividing the actual flow, Q.Plant by this metric. This will give alpha, which is the coefficient of proportionality
Q_Sutro := sqrt(2*g)*Pi_VenaContractaOrifice*integral(sqrt(H_dmax - z)*1/sqrt(z), z = 0 .. H_dmax)  # theoretical flow rate predicted by stout equation
α_LfomPipe := Q_Plant/Q_Sutro = 0.0869449 m^(3/2)  # coefficient of proportionality between LFOM and sutro weir
W_LfomPipe(z) := α_LfomPipe/sqrt(z)  # Width of LFOM opening area as a function of height
## Calculation of average velocity in LFOM riser pipe
# Average velocity at the bottom of the riser pipe is calculated by weighting the velocity of falling water from each height sqrt(2*g*height) by the amount of flow at that height, and then dividing by Q_Plant (this is done so that the calculated total flow from the LFOM is not greater than Q_Plant)
V_LfomPipe.Avg := 2*g*Pi_VenaContractaOrifice/Q_Plant*integral(sqrt(z*(H_dmax - z))*W_LfomPipe(z), z = 0 m .. H_dmax) = 0.840585 m/s
# Note that the speed of falling water is 0.841 m/s for all linear flow orifice meters of height 20cm, regardless of total plant flow rate. Even for flow rates as low as 3 L/s, we get a percent error of less than 2%. This makes sense given that all flows are scaled by Q.Plant, regardless of how Q.Plant is defined.
## Final calculation of LFOM riser pipe diameter
# Average velocity at the bottom of the LFOM riser pipe must be slightly greater than what is given by Q.Plant/Area, so we apply a safety factor and solve for the minimum allowable LFOM cross-sectional area and diameter. This safety factor is given in expert inputs.
# Also, PVC pipes only come in certain sizes, so we must round up to the nearest available pipe size. This could result in an implicit addition to the given safety factor.
A_LfomPipeMin := Π_LfomSafety*Q_Plant/V_LfomPipe.Avg = 0.133835 m^2
ID_LfomPipeMin := 2*sqrt(A_LfomPipeMin/π) = 0.412801 m
ND_LfomPipe := NominalDiameter(ID_LfomPipeMin, PS_Default) = 20 in  # Nominal pipe diameter corresponding to the calculated minimum diameter
ND_RMPipe := ND_LfomPipe = 20 in  # Rapid mix pipe and LFOM pipe must be the same size
# LFOM orifice diameter calculation
# The top row of orifices controls the rest of the design. We must ensure that the orifice area in the top row is smaller than the theoretical stout weir area, so that at least one orifice can be placed there.
A_LfomOrificesTop := integral(W_LfomPipe(z), z = H_dmax - B_LfomRows .. H_dmax) = 39.9069 cm^2
D_LfomOrificesTopMax := 2*sqrt(A_LfomOrificesTop/π) = 7.12818 cm
D_LfomOrifices := FloorNearest(min(B_LfomRows, D_LfomOrificesTopMax), D_Drill) = 0.75 in  # Keep orifices as large as possible to make LFOM construction easier
A_LfomOrifices := π*(D_LfomOrifices/2)^2 = 2.85023 cm^2
# Generation of array containing LFOM orifice locations
S_LfomOrificesMin := 5 mm
N_LfomOrificesperRowMax := floor(π*ND_LfomPipe/(D_LfomOrifices + S_LfomOrificesMin)) = 66
# A bound on the number of orifices allowed in each row.  The distance between consecutive orifices must be enough to retain structural integrity of the pipe
# locations where we will try to get the target flows is in between orifices at elevation Pi.H
ramp(start, interval, range)
Q_ramp(B_LfomRows, HL_Lfom) := ramp(B_LfomRows, B_LfomRows, HL_Lfom)/HL_Lfom*Q_Plant  # Target riser flows
# Calculate the flow for a given number of submerged rows of orifices
Q_LfomActual(RowIndexSubmerged, n_Lfomorifices, B_LfomRows, D_Lfomorifice, HL_Lfom) :=
    Q ← 0*L/min
    for i ∈ 0 .. RowIndexSubmerged
        Q ← Q + n_Lfomorifices[i]*Q_orifice(D_Lfomorifice, ramp(B_LfomRows, B_LfomRows, HL_Lfom)[RowIndexSubmerged] - ramp(D_LfomOrifices/2, B_LfomRows, HL_Lfom)[i], Pi_VenaContractaOrifice)
    return Q
# Calculated the optimal orifice diameter based on the diameter of the very highest hole on the LFOM
# Calculate number of orifices at each level given a diameter
fN_LfomOrifices(B_LfomRows, D_LfomOrifice, HL_Lfom) :=
    Q_ramplocal ← Q_ramp(B_LfomRows, HL_Lfom)
    H_ramplocal ← ramp(D_LfomOrifices/2, B_LfomRows, HL_Lfom)
    n[last(H_ramplocal)] ← 0
    for i ∈ 0 .. last(H_ramplocal)
        n[i] ← min(max(0, round((Q_ramplocal[i] - Q_LfomActual(i, n, B_LfomRows, D_LfomOrifice, HL_Lfom))/Q_orificeV(D_LfomOrifice, ramp(B_LfomRows, B_LfomRows, HL_Lfom)[i] - ramp(D_LfomOrifices/2, B_LfomRows, HL_Lfom)[i], Pi_VenaContractaOrifice))), N_LfomOrificesperRowMax)
    return n
N_LfomOrifices := fN_LfomOrifices(B_LfomRows, D_LfomOrifices, HL_Lfom)
# This function calculates the error of the design based on the differences between the predicted flow rate and the actual flow rate through the LFOM.
Q_LfomError(N_LfomOrifices, B_LfomRows, D_LfomOrifices, HL_Lfom, Q_Plant, N_Lfom) :=
    for j ∈ 0 .. last(N_LfomOrifices)
        Q_LfomError[j] ← N_Lfom*(Q_LfomActual(j, N_LfomOrifices, B_LfomRows, D_LfomOrifices, HL_Lfom) - Q_ramp(B_LfomRows, HL_Lfom)[j])/Q_Plant
    return Q_LfomError
# This funciton returns the maximum error, the absolute value of the errors is take into account positive and negative errors.
Q_LfomErrorMax := max(sqrt(Q_LfomError(N_LfomOrifices, B_LfomRows, D_LfomOrifices, HL_Lfom, Q_Plant, N_Lfom)^2)) = 2.95134 %
H_Graph := 0 cm, 0.1 cm .. HL_Lfom
Q_Lfom(H) := sum(vectorize(Q_orificeV(D_LfomOrifices, H - ramp(D_LfomOrifices/2, B_LfomRows, HL_Lfom), Pi_VenaContractaOrifice)*N_LfomOrifices))
Q_LfomIdeal(H) := Q_Plant*H/HL_Lfom
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N_LfomOrifices = [66; 66; 24; 18; 20; 18; 17; 15; 15; 14]
