# Linear Flow Orifice Meter Design File
# Created by Adam Salwen (abs265@cornell.edu)
# Modified by Andrew Smith (abs249@cornell.edu) - Spring 2012
# Overview and design goals
# The linear flow orifice meter was developed in 2008 by the AguaClara team at Cornell University in Ithaca, NY. It maintains a linear relationship between the height of water in the entrance tank and the overall plant flow rate, allowing an operator to easily determine how much water is flowing through the plant at any given time. This task is accomplished by mimicking the theoretical stout weir, as will be described below.
#
# The LFOM made possible the development of an automatic chemical dose controller. This device utilizes the linear relationship between height and flow rate provided by the LFOM, and automatically doses the proper amount of coagulant to water leaving the entrance tank. This eliminates the variability in chemical doses which was previously attributed to plant operators.
#
# Below, we describe the algorithm which designs the AguaClara LFOM and then develop this algorithm using MathCAD code. This code will be integrated into the design tool and used to design LFOM's for all future AguaClara plants.
# Spring 2012: Flow through a single LFOM orifice is no longer assumed to be governed by the Bernoulli equation (Q=A*Pi.VenaContractaOrifice*sqrt(2gh)). Now, we use the equation for flow through a partially filled orifice, developed by the USGS
# References and constants/variables needed for design
## References - used for design/testing purposes only, will be deleted
# [reference: BasicInputs.xmcd]
# [reference: ExpertInputs.xmcd]
# [reference: MathFunctions.xmcd]
# [reference: PipeDatabase.xmcd]
# [reference: FluidsFunctions.xmcd]
# [reference: SedimentationTank.xmcd]
# [reference: Flocculator.xmcd]
## Variables needed for design - many taken from basic/expert inputs
N_LfomRows := Π_Lfomorifice = 10
# Taken from the expert inputs file - gives the number of rows in the LFOM. More rows needed if expected plant flow rate is higher - right now, there is no algorithm to do this automatically
Temp_Lfom[N_LfomRows - 1] := 0
# An array of zeros - the size of this array is equal to the number of rows in the LFOM pipe.
# This will be used extensively in the recursive algorithm which calculates the number of orifices per row.
B_LfomRows := H_dmax/N_LfomRows = 0.02 m  # Center-to-center spacing between LFOM rows
D_LfomOrificesMax := B_LfomRows  # Design constraint: diameter of orifice holes cannot be larger than the height of a single row
Orientation_Orifices :=
    orientation ← 1 if Q_Plant ≤ 100*L/s
    orientation ← 0 otherwise
    return orientation
# 1 corresponds with vertical orifices (standard in LFOM)
# For larger flows, orifices will be horizontal, so set this value to zero
# Design Sketches/ explanation of variable names
# A typical LFOM riser pipe is shown below:
# Image courtesy of: https://confluence.cornell.edu/display/AGUACLARA/LFOM+500+L+per+min
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# LFOM Orifice: D.LfomOrifice refers to the diameter of this hole
#
# ND.LfomPipe refers to the diameter of the entire blue pipe
# This isn't urgent, but I'm not in love with this image because the diameter of the orifices is not to scale. Maybe you could grab an autocad image and label that instead?
# Note that variables with the subscript "LFOM pipe" refer to this large "riser pipe" into which all of the orifices have been drilled
# LFOM riser pipe diameter calculation
## Stout weir overview/calculation of proportionality coefficient
# A stout weir is a theoretical flow control device in which weir width is proportional to 1/sqrt(height).
# It is not physically possible to fabricate such a device because the base would be infinitely wide. In practice, the sutro weir serves as a constructable alternative to the stout. As the sutro weir does, we will use a modified version of the stout equation to model flow through the LFOM:
# W(z) = α/sqrt(z) = α*basicW(z).
# in which W is the weir width, calculated as a function of height
# z is the height, with zero defined at the base of the weir
# Alpha is found by first solving for the theoretical maximum flow through the LFOM:
# flow(height)= Pi_VenaContractaOrifice*integral(sqrt(2*g*(height - z))*1/sqrt(z), z = 0 .. height)
# And then dividing the actual flow, Q.Plant by this metric. This will give alpha, which is the coefficient of proportionality
Q_Sutro := sqrt(2*g)*Pi_VenaContractaOrifice*integral(sqrt(H_dmax - z)*1/sqrt(z), z = 0 .. H_dmax)  # theoretical flow rate predicted by stout equation
α_LfomPipe := Q_Plant/Q_Sutro = 0.0370965 m^(3/2)  # coefficient of proportionality between LFOM and sutro weir
W_LfomPipe(z) := α_LfomPipe/sqrt(z)  # Width of LFOM riser pipe as a function of height
## Calculation of average velocity in LFOM riser pipe
# Average velocity at the bottom of the riser pipe is calculated by weighting the velocity of falling water from each height sqrt(2*g*height) by the amount of flow at that height, and then dividing by Q_Plant (this is done so that the calculated total flow from the LFOM is not greater than Q_Plant)
V_LfomPipe.Avg := 2*g*Pi_VenaContractaOrifice/Q_Plant*integral(sqrt(z*(H_dmax - z))*W_LfomPipe(z), z = 0 m .. H_dmax) = 0.840585 m/s
# Note that the speed of falling water is 0.841 m/s for all linear flow orifice meters of height 20cm, regardless of total plant flow rate. Even for flow rates as low as 3 L/s, we get a percent error of less than 2%. This makes sense given that all flows are scaled by Q.Plant, regardless of how Q.Plant is defined.
## Final calculation of LFOM riser pipe diameter
# Average velocity at the bottom of the LFOM riser pipe must be slightly greater than what is given by Q.Plant/Area, so we apply a safety factor and solve for the minimum allowable LFOM cross-sectional area and diameter. This safety factor is given in expert inputs.
# Also, PVC pipes only come in certain sizes, so we must round up to the nearest available pipe size. This could result in an implicit addition to the given safety factor.
A_LfomPipeMin := Π_LfomSafety*Q_Plant/V_LfomPipe.Avg = 0.0571031 m^2
ID_LfomPipeMin := 2*sqrt(A_LfomPipeMin/π) = 0.26964 m
ND_LfomPipe := NominalDiameter(ID_LfomPipeMin, PS_Default) = 12 in  # Nominal pipe diameter corresponding to the calculated minimum diameter
ND_RMPipe := ND_LfomPipe = 12 in  # Rapid mix pipe and LFOM pipe must be the same size
# LFOM orifice diameter calculation
# The top row of orifices controls the rest of the design. We must ensure that the orifice area in the top row is smaller than the theoretical stout weir area, so that at least one orifice can be placed there.
A_LfomOrificesTop := integral(W_LfomPipe(z), z = H_dmax - B_LfomRows .. H_dmax) = 17.0269 cm^2
D_LfomOrificesTopMax := 2*sqrt(A_LfomOrificesTop/π) = 4.65611 cm
D_LfomOrifices := FloorNearest(min(D_LfomOrificesMax, D_LfomOrificesTopMax), D_Drill) = 1.905 cm
# Keep orifices as large as possible to make LFOM construction easier
A_LfomOrifices := π*(D_LfomOrifices/2)^2 = 2.85023 cm^2
# April 15, 2012: Pi.VenaContracta orifice taken away to avoid "double-applying" the vena contracta coefficient in the orifice equation
# Generation of array containing LFOM orifice locations
N_LfomOrificesperRowMax := floor(π*ND_LfomPipe/(2*D_LfomOrifices)) = 25
# A bound on the number of orifices allowed in each row.  The distance between consecutive orifices must be equal to the diameter of a single orifice.
H_LfomOrifice :=
    array[N_LfomRows - 1] ← 0
    for i ∈ 0 .. last(array)
        array[i] ← i*B_LfomRows + D_LfomOrifices/2
    return array
# The height locations of the center of the orifices.  Necessary for calculating height difference.  Also, this is passed to the design tool so that the orifices can be drawn at the correct heights. Since all of the orifices in a certain row are at the same height, this array can be thought of as giving the height of each row of orifices.
#
# Note that orifice height in this array is D/2 greater than the height to the orifice bottom. This gives the height of the center of the orifice above each testing location, which is the correct zero level.
# The area of each orifice multiplied by the Vena Contracta Coefficient
H_LfomOrifice = [0.9525; 2.9525; 4.9525; 6.9525; 8.9525; 10.9525; 12.9525; 14.9525; 16.9525; 18.9525] cm
# Calculation of total flow, flow from a row of orifices, and flow from a single orifice
# Revised Spring 2012: FlowOutSingle calculates the amount of flow out of a single orifice in row
# #RowOut when there is just enough water to submerge row #RowIn. Thus FlowOutSingle(i,i)
# must always be positive and nonzero.
# Now uses flow through a partially filled orifice equation (http://il.water.usgs.gov/proj/feq/fequtl98.i2h/4_7aupdate.html) to determine flow out of the orifice if it is determined that a vertical orifice is being used. Right now, the orifices are always completely covered. However, if they were partially filled, the same equation could be applied.
h_LfomOrifice(Row_In, Row_Out) := (Row_In + 1)*B_LfomRows - H_LfomOrifice[Row_Out] + D_LfomOrifices/2
# Amount of head available at orifice location. Row.In represents the orifice row that is just submerged, and Row.Out represents the orifice row where available head is desired.
Q_LfomOrifice(Row_In, Row_Out) :=
    Q ← Q_orifice(D_LfomOrifices, h_LfomOrifice(Row_In, Row_Out), Pi_VenaContractaOrifice) if Orientation_Orifices == 0
    Q ← Q_orificeV(D_LfomOrifices, h_LfomOrifice(Row_In, Row_Out), Pi_VenaContractaOrifice) if Orientation_Orifices == 1
    return Q
# Expression for flow through a single LFOM orifice. Calls the Q.orifice equation in the fluids functions file (Q.orificeV in the case of vertical orifices)
Q_LfomOrifice(1, 1) = 0.109866 L/s  # Flow from a single, completely filled orifice when the water just covers it - generated from new equation
# Flow from a single, completely filled orifice when the water just covers it - generated from old algorithm
8.139*10^-5*m^3/s
# This calculates the increase in flow rate achieved by adding a single orifice in the top submerged row.
# It will be necessary for the recursive algorithm which chooses how many orifices to place in each row.
Q_LfomOrificeAdditional := Q_LfomOrifice(0, 0) = 0.109866 L/s
Q_LfomTotal(WaterRowHeight, OrificeArray) :=
    total ← 0
    for i ∈ 0 .. WaterRowHeight
        total ← total + Q_LfomOrifice(WaterRowHeight, i)*OrificeArray[i]
    return total
# This calculate the total flow through the LFOM when the water just submerges the inputed row.  WaterRowHeight can also be viewed as the number of rows submerged.
Q_LfomTotalByRow(OrificeArray) :=
    Q[last(OrificeArray)] ← 0
    for i ∈ 0 .. last(Q)
        Q[i] ← Q_LfomTotal(i, OrificeArray)
    return Q  # Each cell in Q.LfomOrificeRow.Vector is equal to the amount of total flow when water just submerges the specified row.
# Calculation of theoretical flow from each LFOM row
Q_LfomTotalByRow.Target :=
    Q_Theoretical[N_LfomRows - 1] ← 0
    for i ∈ 0 .. last(Q_Theoretical)
        Q_Theoretical[i] ← (i + 1)*Q_Plant/N_LfomRows
    return Q_Theoretical
# If our approximation were perfect and the LFOM gave an exactly linear relationship between height and flow rate, Q.LfomOrificeRow.Target would give the total flow from the LFOM when the specified row is just barely covered with water. Since our approximation is not perfect, however, we will use this array as a basis for error calculations. As described below, we will be running a recursive algorithm that aims to minimize least-square error between our design and the theoretical perfectly linear LFOM.
#
# Note that (N.LfomRows-1) and (i+1) are included to align with MathCAD's format of incrementing. The first row in the LFOM is row 1, but the first entry in a MathCAD array is entry zero.
Q_LfomTotalByRow.Target = [0.0032; 0.0064; 0.0096; 0.0128; 0.016; 0.0192; 0.0224; 0.0256; 0.0288; 0.032] m^3/s
# LFOM design algorithm - determination of appropriate number of orifices per LFOM row
# This is the recursive algorithm that carries out the bulk of the LFOM design work.
# At each row, it calculates how many orifices would be needed in order for the LFOM to exactly achieve linear flow (note that this is typically not an integer number).
# Because it is not possible to produce an LFOM with fractions of orifices, and because head losses would be different than calculated for a full orifice, we will use Mathcad's floor and ceiling functions to determine what the actual flow would be if we round up or round down.
#
# The algorithm produces several trial LFOM rows (with different numbers of orifices), and tests them in series with all of the other LFOM rows. Whichever configuration most closely approximates linear flow is chosen. The results are then passed to the design tool, which draws the final LFOM design.
#
# Mean square error (MSE) is used to determine how closely a particular LFOM design approximates linear flow. [MSE is calculated by summing the squares of the deviation from Q.LfomOrificeRow.Target]
# Note that Q.LfomOrificeAdditional takes the place of incrementHoleonLevel
MSE(Q_Test) :=
    sum ← 0
    for i ∈ 0 .. last(Q_Test)
        sum ← sum + (Q_Test[i] - Q_LfomTotalByRow.Target[i])^2
    return sum
# This returns the mean square error of a given flow array, as compared to Q.LfomOrificeRow.Target (the flows returned from a theoretical, perfectly linear LFOM)
Compare_OrificeArray(OrificeArray_Test, OrificeArray_Current) :=
    Q_Test ← Q_LfomTotalByRow(OrificeArray_Test)
    Q_Current ← Q_LfomTotalByRow(OrificeArray_Current)
    OrificeArray_Selected ← OrificeArray_Test if MSE(Q_Test) < MSE(Q_Current)
    OrificeArray_Selected ← OrificeArray_Current otherwise
    return OrificeArray_Selected
# This function will be used in the recursive algorithm below to select between possible LFOM configurations. As discussed above, the recursive algorithm will produce many trial LFOM designs by rounding the ideal number of orifices per row either up or down to an integer number. Each new trial design will be compared with the "incumbent", or existing design, and the design that more closely approximates linear flow will be retained. A smaller mean square error indicates a better fit.
N_LfomOrificesAdditional.Low(OrificeArray_Test, WaterRowHeight) :=
    Q_Previous ← Q_LfomTotal(WaterRowHeight, OrificeArray_Test)
    Q_Additional ← Q_LfomTotalByRow.Target[WaterRowHeight] - Q_Previous
    N_Orifices ← floor(Q_Additional/Q_LfomOrificeAdditional)
    N_Orifices ← max(0, N_Orifices)
    N_Orifices ← min(N_LfomOrificesperRowMax - 1, N_Orifices)
    return N_Orifices
# Given a new LFOM configuration, this function first calculates how many additional orifices would be needed in a new row to achieve perfectly linear flow. This is done by dividing the additional flow by the additional flow through single orifice --> this will not produce an integer value. Because of this, the value is rounded down. We can add one to get the "rounded-up" value.
#
# Note that rows 4 and 5 serve as "checks" - we cannot have a negative number of orifices. Also, addition of new orifices cannot result in an illegally high number of total orifices in a given row.
LfomDesign(OrificeArray_Test, OrificeArray_Current, WaterRowHeight) :=
    OrificeArray_Selected ← Compare_OrificeArray(OrificeArray_Test, OrificeArray_Current) if WaterRowHeight > last(OrificeArray_Test)
    otherwise
        if WaterRowHeight ≤ last(OrificeArray_Test)
            N_LfomOrificesAdditional.Low ← N_LfomOrificesAdditional.Low(OrificeArray_Test, WaterRowHeight)
            for i ∈ N_LfomOrificesAdditional.Low .. N_LfomOrificesAdditional.Low + 1
                OrificeArray_TestNewRow ← OrificeArray_Test
                OrificeArray_TestNewRow[WaterRowHeight] ← i
                OrificeArray_Current ← LfomDesign(OrificeArray_TestNewRow, OrificeArray_Current, WaterRowHeight + 1)
            OrificeArray_Selected ← OrificeArray_Current
    return OrificeArray_Selected
# This is the recursive algorithm that carries out our design:
#
# If test designs have already been generated for each row of orifices, run a comparison and return
# the design that best approximates linear flow.
#
# If this has not yet happened:
# 1. Set the number of orifices in the current row equal to the integer number of orifices needed to achieve perfectly linear flow (if ideal number of orifices is not an integer, try both the floor and ceiling of the value).
# 2. Go back and call the design function for the next level up, testing both the "floor" and "ceiling" values.
# 3. Return the current best orifice array, based on the calculations described above.
# Generation of final LFOM design
# Calculate the final LFOM design by using the Temp.Lfom array defined in the last section and beginning at the zero level (base)
N_LfomOrifices := LfomDesign(Temp_Lfom, Temp_Lfom, 0) = [25; 23; 11; 11; 8; 9; 7; 7; 6; 7]
# Analysis of LFOM design generated
Q_LfomTotalByRow.Design := Q_LfomTotalByRow(N_LfomOrifices)  # This gives the total flow from the design orifice when water just submerges each row
Array_Graph(Array) :=
    OutputArray[rows(Array)] ← 0
    for i ∈ 1 .. last(OutputArray)
        OutputArray[i] ← Array[i - 1]
    return OutputArray
# This function creates an array which can be graphed by adding the point (0,0) and shifting all other values so that the x-value reflects the LFOM row number (rather than the LFOM row number -1)
Q_Graph.Design := Array_Graph(Q_LfomTotalByRow.Design)
# Uses the Array.Graph function just defined to create graphable flow arrays for our actual LFOM design and the theoretical, perfectly linear design
Q_Graph.Target := Array_Graph(Q_LfomTotalByRow.Target)
H_Orifices :=
    H_Array[last(Q_Graph.Design)] ← 0
    for i ∈ 0 .. last(H_Array)
        H_Array[i] ← i*B_LfomRows
    return H_Array  # Outputs the height of the center of each row of orifices, relative to the bottom of the LFOM pipe. Includes the point (0,0)
xi := 0 .. last(Q_Graph.Design)  # Incrementing variable which will be used when graphing the results
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# Percent error between theoretically perfect linear flow and flow through our LFOM
Q_Error := ((Q_LfomTotalByRow.Design - Q_LfomTotalByRow.Target)/Q_LfomTotalByRow.Target)*100
Q_Error.Graph := Array_Graph(Q_Error)
Q_Error.Graph :=
    Error[last(Q_Error.Graph)] ← 0
    for i ∈ 0 .. last(Q_Error.Graph)
        Error[i] ← |Q_Error.Graph[i]|
    return Error  # Adjusts output to reflect the fact that percent error cannot be negative
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# Comparison with old algorithm (horizontal orifices assumed)
FlowBestEstimate := TotalFlow_vector(N_LfomOrifices)  # The total flow when water just submerges each row.
AddZeroforGraph(array) :=
    temp[rows(array)] ← 0
    for i ∈ 1 .. last(temp)
        temp[i] ← array[i - 1]
    return temp  # This adds the (0,0) value to the flow arrays for graphing
EstimateGraph := AddZeroforGraph(FlowBestEstimate)  # The two arrays to be graphed
IdealGraph := AddZeroforGraph(TargetFlow)
H_testlocations :=
    temp[last(EstimateGraph)] ← 0
    for i ∈ 0 .. last(temp)
        temp[i] ← i*S_LfomRows
    return temp  # The height values after each row.  This includes zero height
xi := 0 .. last(EstimateGraph)  # Variable tool used for graphing
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PercentError := (FlowBestEstimate - TargetFlow)/TargetFlow*100  # For all values exept for the zero value, which has no error
PercentErrorGraph := AddZeroforGraph(PercentError)
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