# Linear Flow Orifice Meter Design File
# Created by Adam Salwen (abs265@cornell.edu)
# Modified by Andrew Smith (abs249@cornell.edu) - Spring 2012
# Rewritten and simplified to eliminate iteration by Monroe - Spring 2012
# Overview and design goals
# The linear flow orifice meter was developed in 2008 by the AguaClara team at Cornell University in Ithaca, NY. It maintains a linear relationship between the height of water in the entrance tank and the overall plant flow rate, allowing an operator to easily determine how much water is flowing through the plant at any given time. This task is accomplished by mimicking the theoretical stout weir, as will be described below.
#
# The LFOM made possible the development of an automatic chemical dose controller. This device utilizes the linear relationship between height and flow rate provided by the LFOM, and automatically doses the proper amount of coagulant to water leaving the entrance tank.
#
# Below, we describe the algorithm which designs the AguaClara LFOM and then develop this algorithm using MathCAD code.
# References and constants/variables needed for design
## References - used for design/testing purposes only, will be deleted
Q_Plant := 50*L/s
# [reference: ExpertInputs.xmcd]
# [reference: MathFunctions.xmcd]
HL_Lfom := 20 cm
# [reference: PipeDatabase.xmcd]
# [reference: FluidsFunctions.xmcd]
# [reference: SedimentationTank.xmcd]
# [reference: Flocculator.xmcd]
# LFOM Orifice: D.LfomOrifice refers to the diameter of a single orifice
# ND.LfomPipe refers to the nominal diameter of the pipe
# H.DMax is taken as the distance between the bottom of the bottom row of orifices to the limit of the linear relationship between flow and height
# LFOM riser pipe diameter calculation
## Stout weir overview/calculation of proportionality coefficient
# A stout weir is a theoretical flow control device in which weir width is proportional to 1/sqrt(height).
# It is not physically possible to fabricate such a device because the base would be infinitely wide. In practice, the sutro weir serves as a constructable alternative to the stout.We will use the Stout weir equation to model flow through the LFOM:
W_Stout == α/sqrt(z)  # assumed form of the weir
Q == α*sqrt(2*g)*Pi_VenaContractaOrifice*integral(sqrt(HL_Lfom - z)*1/sqrt(z), z = 0 .. HL_Lfom)  # based on V == sqrt(2*g*H)
integral(sqrt(HL_Lfom - z)*1/sqrt(z), z = 0 .. HL_Lfom) == π*HL_Lfom/2  # evaluate the integral
Q == α*sqrt(2*g)*Pi_VenaContractaOrifice*π*HL_Lfom/2  # simplified equation for flow
α == Q/(sqrt(2*g)*Pi_VenaContractaOrifice*π*HL_Lfom/2)  # solve for alpha
W_Stout == 2*Q/(sqrt(2*g*z)*Pi_VenaContractaOrifice*π*HL_Lfom)  # Width of the Stout weir
W_Stout(HL_Lfom, z) := 2/(sqrt(2*g*z)*Pi_VenaContractaOrifice*π*HL_Lfom)  # Width of Stout opening area as a function of height (per unit flow!!!)
W_Stout*B_LfomRows == 2*π*B_LfomRows^2/4
# This equation states that the open area corresponding to one row can be set equal to two orifices of diameter=row height. If there are more than two orifices per row at the top of the LFOM then there are more orifices than are convenient to drill and more than necessary for good accuracy. Thus this relationship can be used to increase the spacing between the rows and thus increase the diameter of the orifices.
# This spacing function also sets the lower depth on the high flow rate LFOM with no accurate flows below a depth equal to the first row height.
B_LfomRows == W_Stout*2/π
N_LfomRows(Q_Plant, HL_Lfom) := min(10, max(4, trunc(HL_Lfom/(4*(W_Stout(HL_Lfom, HL_Lfom)*Q_Plant)/(2*π)))))
B_LfomRows == 2/π*2*Q/(sqrt(2*g*z)*Pi_VenaContractaOrifice*π*HL_Lfom)
fB_LfomRows(Q_Plant, HL_Lfom) := HL_Lfom/N_LfomRows(Q_Plant, HL_Lfom)
fB_LfomRows(Q_Plant, HL_Lfom) = 0.05 m  # Center-to-center spacing between LFOM rows
## Calculation of average velocity in LFOM riser pipe
# Average velocity at the bottom of the riser pipe is calculated by weighting the velocity of falling water from each height sqrt(2*g*height) by the amount of flow at that height, and then dividing by the total mass flux to obtain the average velocity. This analysis is based on momentum conservation.
V_zStout0 == integral(ρ*Q(z)*sqrt(2*g*z), z = 0 m .. HL_Lfom)/(ρ*Q_Total)
V_zStout0 == integral(ρ*V(z)*W(z)*Π_vc*sqrt(2*g*z), z = 0 m .. HL_Lfom)/(ρ*Q_Total)
V_zStout0 == integral(ρ*sqrt(2*g(HL_Lfom - z))*Q_Total/(sqrt(2*g*z)*Π_vc*π*HL_Lfom/2)*Π_vc*sqrt(2*g*z), z = 0 m .. HL_Lfom)/(ρ*Q_Total)
V_zStout0 == 2*sqrt(2*g)/(π*HL_Lfom)*2*HL_Lfom^(3/2)/3
V_zStout0 == 4/(3*π)*sqrt(2*g*HL_Lfom)
V_LfomPipe.Avg(HL_Lfom) := 4/(3*π)*sqrt(2*g*HL_Lfom)
# Note that the speed of falling water is 0.841 m/s for all linear flow orifice meters of height 20cm, independent of total plant flow rate.
V_LfomPipe.Avg(HL_Lfom) = 0.84058 m/s
## Final calculation of LFOM riser pipe diameter
# Average velocity at the bottom of the LFOM riser pipe must be slightly greater than what is given by Q.Plant/Area, so we apply a safety factor and solve for the minimum allowable LFOM cross-sectional area and diameter. This safety factor is given in expert inputs.
# Also, PVC pipes only come in certain sizes, so we must round up to the nearest available pipe size. This could result in an implicit addition to the given safety factor.
A_LfomPipeMin(Q_Plant, HL_Lfom) := Π_LfomSafety*Q_Plant/V_LfomPipe.Avg(HL_Lfom)
fND_LfomPipe(Q_Plant, HL_Lfom, PS_Default) := NominalDiameter(2*sqrt(A_LfomPipeMin(Q_Plant, HL_Lfom)/π), PS_Default)
# Nominal pipe diameter corresponding to the calculated minimum diameter
EN_LfomPipe :=
    1 if fND_LfomPipe(Q_Plant, HL_Lfom, PS_Default) ≤ 12 in
    0 otherwise
# LFOM orifice diameter calculation
# The top row of orifices controls the rest of the design. We must ensure that the orifice area in the top row is smaller than the theoretical stout weir area, so that at least one orifice can be placed there.
A_LfomOrificesTop(Q_Plant, HL_Lfom) := Q_Plant*integral(W_Stout(HL_Lfom, z), z = HL_Lfom - fB_LfomRows(Q_Plant, HL_Lfom) .. HL_Lfom)
D_LfomOrificesTopMax(Q_Plant, HL_Lfom) := 2*sqrt(A_LfomOrificesTop(Q_Plant, HL_Lfom)/π)
fD_LfomOrifices(Q_Plant, HL_Lfom, D_Drill) := FloorNearest(min(fB_LfomRows(Q_Plant, HL_Lfom), D_LfomOrificesTopMax(Q_Plant, HL_Lfom)), D_Drill)
# Keep orifices as large as possible to make LFOM construction easier
fD_LfomOrifices(Q_Plant, HL_Lfom, D_Drill) = 1.75 in
A_LfomOrifices(Q_Plant, HL_Lfom, D_Drill) := π*(fD_LfomOrifices(Q_Plant, HL_Lfom, D_Drill)/2)^2
# Generation of array containing LFOM orifice locations
# A bound on the number of orifices allowed in each row.  The distance between consecutive orifices must be enough to retain structural integrity of the pipe
N_LfomOrificesperRowMax(Q_Plant, HL_Lfom, D_Drill, PS_Default) := floor(π*fND_LfomPipe(Q_Plant, HL_Lfom, PS_Default)/(fD_LfomOrifices(Q_Plant, HL_Lfom, D_Drill) + S_LfomOrificesMin))
N_LfomOrificesperRowMax(Q_Plant, HL_Lfom, D_Drill, PS_Default) = 24
# locations where we will try to get the target flows is in between orifices at elevation Pi.H
Q_ramp(Q_Plant, HL_Lfom) := ramp(fB_LfomRows(Q_Plant, HL_Lfom), fB_LfomRows(Q_Plant, HL_Lfom), HL_Lfom)/HL_Lfom*Q_Plant  # Target riser flows
Q_ramp(Q_Plant, HL_Lfom) = [12.5; 25; 37.5; 50] L/s
fH_LfomOrifices(Q_Plant, HL_Lfom, D_Drill) := ramp(fD_LfomOrifices(Q_Plant, HL_Lfom, D_Drill)/2, fB_LfomRows(Q_Plant, HL_Lfom), HL_Lfom)
# Calculate the flow for a given number of submerged rows of orifices
Q_LfomActual(Q_Plant, HL_Lfom, D_Drill, RowIndexSubmerged, n_Lfomorifices) :=
    Q ← 0*L/min
    D_LfomOrifices ← fD_LfomOrifices(Q_Plant, HL_Lfom, D_Drill)
    for i ∈ 0 .. RowIndexSubmerged
        Q ← Q + n_Lfomorifices[i]*Q_orificeV(D_LfomOrifices, ramp(fB_LfomRows(Q_Plant, HL_Lfom), fB_LfomRows(Q_Plant, HL_Lfom), HL_Lfom)[RowIndexSubmerged] - ramp(D_LfomOrifices/2, fB_LfomRows(Q_Plant, HL_Lfom), HL_Lfom)[i], Pi_VenaContractaOrifice)
    return Q
# Calculate number of orifices at each level given a diameter
fN_LfomOrifices(Q_Plant, HL_Lfom, D_Drill, PS_Default) :=
    Q_ramplocal ← Q_ramp(Q_Plant, HL_Lfom)
    D_LfomOrifices ← fD_LfomOrifices(Q_Plant, HL_Lfom, D_Drill)
    H_ramplocal ← ramp(D_LfomOrifices/2, fB_LfomRows(Q_Plant, HL_Lfom), HL_Lfom)
    n[last(H_ramplocal)] ← 0
    for i ∈ 0 .. last(H_ramplocal)
        n[i] ←
            min(max(0, round((Q_ramplocal[i] - Q_LfomActual(Q_Plant, HL_Lfom, D_Drill, i, n))/Q_orificeV(D_LfomOrifices, ramp(fB_LfomRows(Q_Plant, HL_Lfom), fB_LfomRows(Q_Plant, HL_Lfom), HL_Lfom)[i] - ramp(D_LfomOrifices/2, fB_LfomRows(Q_Plant, HL_Lfom), HL_Lfom)[i], Pi_VenaContractaOrifice))), N_LfomOrificesperRowMax(Q_Plant, HL_Lfom, D_Drill, PS_Default)) if fND_LfomPipe(Q_Plant, HL_Lfom, PS_Default) ≤ 12 in
            max(0, round((Q_ramplocal[i] - Q_LfomActual(Q_Plant, HL_Lfom, D_Drill, i, n))/Q_orificeV(D_LfomOrifices, ramp(fB_LfomRows(Q_Plant, HL_Lfom), fB_LfomRows(Q_Plant, HL_Lfom), HL_Lfom)[i] - ramp(D_LfomOrifices/2, fB_LfomRows(Q_Plant, HL_Lfom), HL_Lfom)[i], Pi_VenaContractaOrifice))) otherwise
    return n
# This function calculates the error of the design based on the differences between the predicted flow rate and the actual flow rate through the LFOM.
Q_LfomError(Q_Plant, HL_Lfom, D_Drill, PS_Default) :=
    N_LfomOrifices ← fN_LfomOrifices(Q_Plant, HL_Lfom, D_Drill, PS_Default)
    for j ∈ 0 .. last(N_LfomOrifices)
        Q_LfomError[j] ← (Q_LfomActual(Q_Plant, HL_Lfom, D_Drill, j, N_LfomOrifices) - Q_ramp(Q_Plant, HL_Lfom)[j])/Q_Plant
    return Q_LfomError
# This funciton returns the maximum error, the absolute value of the errors is take into account positive and negative errors.
Q_LfomErrorMax := max(sqrt(Q_LfomError(Q_Plant, HL_Lfom, D_Drill, PS_Default)^2)) = 0.39066 %
H_Graph := 0 cm, 0.5 cm .. HL_Lfom
Q_LfomIdeal(Q_Plant, HL_Lfom, H) := Q_Plant*H/HL_Lfom
Q_Lfom(Q_Plant, HL_Lfom, D_Drill, PS_Default, H) :=
    D_LfomOrifices ← fD_LfomOrifices(Q_Plant, HL_Lfom, D_Drill)
    H_Submerged ← H - ramp(D_LfomOrifices/2, fB_LfomRows(Q_Plant, HL_Lfom), HL_Lfom)
    N_LfomOrifices ← fN_LfomOrifices(Q_Plant, HL_Lfom, D_Drill, PS_Default)
    D_LfomOrifices ← fD_LfomOrifices(Q_Plant, HL_Lfom, D_Drill)
    for i ∈ 0 .. last(H_Submerged)
        Q ← Q + Q_orificeV(D_LfomOrifices, H_Submerged[i], Pi_VenaContractaOrifice)*N_LfomOrifices[i]
    return Q
N_LfomOrifices := fN_LfomOrifices(Q_Plant, HL_Lfom, D_Drill, PS_Default) = [18; 5; 6; 4]
H_LfomOrifices := fH_LfomOrifices(Q_Plant, HL_Lfom, D_Drill) = [2.2225; 7.2225; 12.2225; 17.2225] cm
B_LfomRows := fB_LfomRows(Q_Plant, HL_Lfom) = 5 cm
ND_LfomPipe := fND_LfomPipe(Q_Plant, HL_Lfom, PS_Default) = 15 in
ND_LfomPipe = 15 in
ND_RMPipe := ND_LfomPipe = 15 in
D_LfomOrifices := fD_LfomOrifices(Q_Plant, HL_Lfom, D_Drill) = 1.75 in
# LFOM channel calculations for high flow
L_LfomChannel := (D_LfomOrifices + S_LfomOrificesMin)*N_LfomOrifices[0] = 0.8901 m
# Based on the assumption that the LFOM channel will be square.
HW_LfomChannel := H_HorizChannelΠ(Q_Plant, 1, HL_ChannelMax, L_LfomChannel, Nu_Water, E_Concrete, 0) = 0.256116 m
H_LfomChannel := HW_LfomChannel + HL_Lfom + H_PlantFreeboard
W_LfomChannel := W_HorizChannelΠ(Q_Plant, 1, HL_ChannelMax, L_LfomChannel, Nu_Water, E_Concrete, 0) = 0.256116 m
W_RMChannel := W_LfomChannel  # Or perhaps these do not have to be the same width? Since they'll be perpendicular to each other?
Z_LfomChannelBottom := □  # error: This placeholder is empty.
# Must be based on the height of water in the flocculator (indirectly on sed tank elevations). Will be used to calculate the elevation of the entrance tank! (must modify et design file)
L_RMChannel := □  # error: This placeholder is empty.  # Must be defined based distance between the entrance tank and flocculator
