# Low Flow Stacked Rapid Sand Filter
# Dimensions and Pipe Sizes
L_FiBodyPipe := 6 ft
S_FiInletMan := 40 cm
PS_Fi := 2
ND_FiPipe := 12 in
ND_FiManTrunk := 1 in
ND_FiManBranch := .5 in
ND_FiManPipe := 2 in
ND_BallValve := 2 in
ND_FiBW := 3/2*in
ND_BedTester := 1/2*in
ND_BedTesterOuter := 1 in
H_FiManCap := CapHeight(ND_FiManTrunk)/2
T_FiLayer := 20 cm
N_FiManBranch := 3  # number of branches on either side
D_FiTopRingOuter := 14 in
Dist_CentToRodTop := 6.6739 in
Dist_CentToStuds := 5.6525 in
D_FiTopRingInner := 10 in
D_FiRodHoles := 5/16*in
H_FiCap := 3/8*in
# Layer Thickness as Function of Trunk Diameter
# round up to the nearest cm to make construction easier
H_FiLayerF(ND_Trunk) := max(H_FiLayerMin, Ceil(outerdiameter(ND_Trunk) + S_FiTrunkMin, 1 cm), Ceil(OuterDiameterFittingPVC(ND_Trunk), 1 cm), Ceil(FerncoOuterDiameter(ND_Trunk), 1 cm))
H_FiBottomLayerF(ND_Trunk, ND_BwTrunk) := max(H_FiLayerMin, Ceil(outerradius(ND_Trunk) + outerradius(ND_BwTrunk) + S_FiTrunkMin, 1 cm), Ceil(ConRadius(ND_Trunk) + ConRadius(ND_BwTrunk), 1 cm), Ceil(FerncoOuterDiameter(ND_Trunk)/2 + FerncoOuterDiameter(ND_BwTrunk)/2, 1 cm))
# Flow Distribution Constraints: Ratio of Pressure Recovery to Clean Bed Head Loss
# There are three flow distribution problems in the filter design: distribution between the slots along a manifold branch, distribution between branches along a trunk, and distribution between filter layers. The first two are both addressed by making pressure recovery in the manifold (both trunks and branches) small relative to the short path head loss (head loss through the clean bed, since slot head loss in forward filtration is small). In backwash mode where there is no bed head loss, the pressure recovery in the manifold plumbing must be small relative to slot head loss.
#
# Head loss through the inlet and outlet plumbing differs for different layers both because the number of elbows varies and because the top and bottom inlets have 1/2 the flow of the middle two. Therefore good flow distribution between layers would be addressed by making head loss through the inlet and outlet plumbing small for all layers relative to clean bed head loss. We do not have an explicit constraint set for this, but the constraint on trunk diameter which gives good flow distribution within the manifolds seems to be sufficient to take care of it. As a check, see the analysis under the section "Path Head Loss Calculations and Flow Distribution Between Layers" below.
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Pi_FiManifoldQ := 0.85  # Ratio of long path flow to short path flow
Pi_FiManifoldHeadLoss := 1 - Pi_FiManifoldQ^2 = 0.2775
# Ratio of pressure recovery in the slotted pipes to the head loss through the clean bed (or through the slots in backwash mode)
# Even though the piezometric head profiles for the inlet and outlet manifolds on the middle layers may be parallel meaning that pressure recovery there need not be small for good distribution between sand bed flow paths, we still need pressure recovery to be small in the outlet manifolds in order to get good flow distribution in the top and bottom layers where the velocity in the manifolds is 1/2 and the pressure recovery 1/4 that of other layers (even smaller in the larger-diameter bottom manifold where velocity head is tiny).
# Number of Filters, Trunk Diameter and Layer Thickness Based on Flow Distribution Constraint
Q_FilterMax :=
    H_FiLayer ← T_FiLayer
    HL_FiCleanLayer ← h_lKozeny(H_FiLayer, D_FiSand60, V_FiLayer, ε_FiSand, Nu_Water)
    V_FiTrunkMaxPR ← sqrt(2*g*HL_FiCleanLayer*Pi_FiManifoldHeadLoss)
    Q_FilterMax ← π*innerdiameter(ND_FiManTrunk, PS_Default)^2/4*V_FiTrunkMaxPR*N_FiLayer/2
    return Q_FilterMax
# This function returns the maximum flow rate through a filter for each of the available trunk pipe sizes based on the manifold flow distribution constraint.
Q_FilterMax = L/s  # Q.FilterMax using equations used to find max flow rate in SRSF
Q_LFFilterMax := 0.8*L/s  # Optimal flow rate found by experimentation
N_Fi := ceil(Q_Plant/Q_LFFilterMax) = 3
# We will have one filter up until the plant flow is the maximum for a 6 inch trunk, after which we will multiply the filter as needed
H_FiLayer := H_FiLayerF(ND_FiManTrunk) = 20 cm
# Clean Bed Head Loss and Maximum Manifold Velocity
# Filtration manifold maximum velocity
HL_FiCleanLayer := h_lKozeny(H_FiLayer, D_FiSand60, V_FiLayer, ε_FiSand, Nu_Water) = 5.56209 cm
PR_FiManifoldMax := HL_FiCleanLayer*Pi_FiManifoldHeadLoss
V_FiManMaxPR := sqrt(2*g*PR_FiManifoldMax) = 0.550207 m/s
# Backwash manifold maximum velocity
HL_FiBwSlotsEst := 5 cm
PR_FiBwManifoldMax := HL_FiBwSlotsEst*Pi_FiManifoldHeadLoss
V_FiBwManMaxPR := sqrt(2*g*PR_FiBwManifoldMax) = 0.521665 m/s
# Number of Filters, Flow Rate Calculations, and Backwash Trunk Diameter
Q_Fi := Q_Plant/N_Fi = 0.8 L/s  # The flow will be divided evenly between the N_Fi = filters.
A_FiActive := Q_Fi/(N_FiLayer*V_FiLayer) = 0.0727273 m^2  # This is the required area of each of the N_Fi = filters.
A := π*innerdiameter(12 in, PS_Default)^2 = 0.277927 m^2
Q_FiLayer := Q_Fi/N_FiLayer = 0.133333 L/s  # This is the flow rate through each filter layer
ND_FiBwTrunk := NominalDiameter(CeilNearest(D_circle(Q_Fi/V_FiBwManMaxPR), AvailPipeSizes(PS_Default)[:, 0]), PS_Default) = 2 in
# Backwash Manifold Design and Slot Area
Q_FiBwManBranch := Q_Fi/N_FiManBranch = 0.266667 L/s
PR_FiBwManBranch := (Q_FiBwManBranch/(π*innerdiameter(ND_FiBwManBranch, PS_FiBranch)^2/4))^2/(2*g) = 0.210169 cm
HL_FiBwSlot := PR_FiBwManBranch/Pi_FiManifoldHeadLoss = 0.757366 cm
A_FiBwManSlots := A_orifice(HL_FiBwSlot, Pi_VenaContractaOrifice, Q_Fi) = 0.00329474 m^2
# Check that head loss through the backwash slots is small in filtration mode (we want good flow distribution between layers, so the bottom layer should not have significantly more slot head loss)
HL_FiBwSlotForward := h_orifice(D_circle(A_FiBwManSlots*ε_FiSand), Pi_VenaContractaOrifice, Q_FiLayer) = 0.131487 cm
A_FiBwManBranches := N_FiManBranch*π*innerdiameter(ND_FiBwManBranch, PS_FiBranch)^2/4 = 39.4031 cm^2
Pi_FiBwManArea := A_FiBwManBranches/A_FiBwManSlots = 1.19594  # This is not used, just a check
# Inner manifolds have double the slot area of the upper and lower manifolds
A_FiManSlots := 2*A_FiBwManSlots = 65.8948 cm^2
HL_FiSlot := (2*Q_FiLayer/(Pi_VenaContractaOrifice*A_FiManSlots*ε_FiSand))^2*1/(2*g) = 0.131487 cm
# A conservative estimate of the head loss through the slots of the normal inlet manifold given sand blockage
# Manifold Pipe Lengths
L_FiManCouplingOffset := 0.5*innerdiameter(ND_FiPipe, PS_Fi) - ConRadius(ND_FiManTrunk)/tan(asin(2*ConRadius(ND_FiManTrunk)/innerdiameter(ND_FiPipe, PS_Fi))) = 0.00130423 m
L_FiManCapOffset := 0.5*innerdiameter(ND_FiPipe, PS_Fi) - ConRadius(ND_FiManBranch)/tan(asin(2*ConRadius(ND_FiManBranch)/innerdiameter(ND_FiPipe, PS_Fi)))
S_FiManBranchEnds := L_FiManCouplingOffset + CouplingLength(ND_FiManTrunk) + outerdiameter(ND_FiManBranch)/2 = 0.0715048 m
L_FiManTrunk := innerdiameter(ND_FiPipe, PS_Fi) - CouplingLength(ND_FiManTrunk) - CapThickness(ND_FiManTrunk) - (2*L_FiManCouplingOffset)
S_FiManBranch := (innerdiameter(ND_FiPipe, PS_Fi) - 2*S_FiManBranchEnds)/(N_FiManBranch - 1) = 0.0801078 m
# cut coupling down
L_FiManBranch :=
    for i ∈ 0 .. N_FiManBranch - 1
        L[i] ←
            0.5*innerdiameter(ND_FiPipe, PS_Fi)*sin(acos((0.5*innerdiameter(ND_FiPipe, PS_Fi) - S_FiManBranchEnds + ConRadius(ND_FiManBranch) - S_FiManBranch*i)/(0.5*innerdiameter(ND_FiPipe, PS_Fi)))) - (0.5*innerdiameter(ND_FiManTrunk, PS_FiBranch) + CapThickness(ND_FiManBranch)) if i < N_FiManBranch/2
            (0.5*innerdiameter(ND_FiPipe, PS_Fi) - innerdiameter(ND_FiManTrunk, PS_FiBranch) - L_FiManCapOffset - CapThickness(ND_FiManBranch)) if i + 0.5 == N_FiManBranch/2
            L[N_FiManBranch - 1 - i] otherwise
    L
L_FiInBushingtoBodyPipe := 2*SocketDepth(ND_FiManTrunk) + (outerradius(ND_FiManPipe) - innerdiameter(ND_FiManPipe, PS_FiBranch)/2)
L_FiInBushingtoElbowPipe := 2*SocketDepth(ND_FiManPipe) + T_PlantWall + S_Fitting
L_BushingtoValvePipe := 2*SocketDepth(ND_FiManPipe)
L_ElbowtoValvePipeOut := 2*SocketDepth(ND_FiManTrunk)
L_FiOutBushingtoBodyPipe := L_FiInBushingtoBodyPipe + ElbowRadius(ND_FiManTrunk)
L_FiCheckValve := .1651 m
L_BottomPipe := L_FiCheckValve + 2*SocketDepth(ND_FiManPipe) + (ElbowRadius(ND_FiManPipe) - ShortTeeLength(ND_FiManPipe))
L_ValvetoTeePipe := L_BushingtoValvePipe + (ElbowRadius(ND_FiManPipe) - ShortTeeLength(ND_FiManPipe))
L_TeetoTeeVertPipe := 2*T_FiLayer - TeeLength(ND_FiManPipe)
L_ElbowtoTeeVertPipe := 2*T_FiLayer - ElbowRadius(ND_FiManPipe) - ShortTeeLength(ND_FiManPipe)
L_HydDisPipe := L_FiBodyPipe - (T_Flange + ConRadius(ND_FiManTrunk) + ShortTeeLength(ND_FiManPipe) + (CouplingLength(ND_FiManPipe) - SocketDepth(ND_FiManPipe)))
# Need to check what this height should be
L_FiBallValve := .1625 m
L_TeetoCapVertPipe := T_FiLayer - ShortTeeLength(ND_FiManPipe)
L_BWOut := 2*SocketDepth(ND_FiBW)
L_BedTester := 170 cm
S_Fi := (2*ElbowRadius(ND_FiManPipe) + L_BottomPipe + 2*TeeLength(ND_FiManPipe) + 3*SocketDepth(ND_FiManPipe))
L_BWHoriz := (S_Fi/2 - L_FiBallValve*ND_FiBW/(2 in) - 2*ElbowRadius(ND_FiBW))/2 + SocketDepth(ND_FiBW)
L_BWOutlet := L_BWOut + L_FiBodyPipe + H_FiCap - (T_Flange + ConRadius(ND_FiManTrunk) + ElbowRadius(ND_FiBW))
L_FiDrainPipes := S_Fi/2 - TeeLength(ND_FiManPipe)
L_FiDrainElbowPipe := S_Fi/2 - ShortTeeLength(ND_FiManPipe) - ElbowRadius(ND_FiManPipe)
L_FiTeetoReducer := 2*SocketDepth(ND_FiManPipe) = 0.092 m
# Bottom Layer Thickness, Total Sand Depth, and Backwash Head Loss
H_FiBottomLayer := H_FiBottomLayerF(ND_FiManTrunk, ND_FiBW) = 20 cm
HL_FiCleanBottomLayer := h_lKozeny(H_FiBottomLayer, D_FiSand60, V_FiLayer, ε_FiSand, Nu_Water) = 5.56209 cm
H_FiSand := (N_FiLayer - 1)*H_FiLayer + H_FiBottomLayer + outerradius(ND_FiManBranch) = 1.21067 m
H_FiSandActive := H_FiSand - outerradius(ND_FiManBranch) = 1.2 m
H_FiFluidizedBed := Pi_FiFluidized*H_FiSand = 1.57387 m
# Sand bed head loss during steady state backwash.
HL_FiBwSS := H_FiSand*(Rho_FiSand - Rho_H2O)*(1 - ε_FiSand)/Rho_H2O = 1.19856 m
# The backwash head loss is almost exactly equal  to the sand bed depth. Note that this ignores losses in the plumbing.
HL_FiDirty := 40 cm  # Mickey suggested this value based on lab experience. Don't know if this is the same for the low flow filter
HL_FiTerminal := HL_FiCleanLayer + HL_FiDirty = 45.5621 cm
HL_FiBwInitiation := HL_FiBwSF + HL_FiBwSS = 1.39856 m
# How much does the filter bed over fluidize when the entrance box level lowers after backwash initiation?
H_FiFluidizedBedVariation := (HL_FiBwInitiation - HL_FiBwSS)*(W_FiEntrance*L_FiEntrance - 3*π*outerradius(ND_FiTrunk)^2 - π*outerradius(ND_FiBwTrunk)^2)/A_FiActive
# Plumbing Head Loss
HL_FiBwInletManifold := 1/3*h_f(Q_Fi, innerD(ND_FiManTrunk, PS_Default), L_FiManTrunk, Nu_Water, E_Pvc) + h_e(Q_Fi/N_FiManBranch, innerD(ND_FiManBranch, PS_FiBranch), K_PipeEnt) + 2/3*h_f(Q_Fi/N_FiManBranch, innerD(ND_FiManBranch, PS_FiBranch), L_FiManBranch[0], Nu_Water, E_Pvc) + 1/3*h_f(Q_Fi/N_FiManBranch, innerD(ND_FiManBranch, PS_FiBranch), L_FiManBranch[1], Nu_Water, E_Pvc) + HL_FiBwSlot = 8.51908 cm
HL_FiInletManifold(Q_Layer) := 1/3*h_f(2*Q_Layer, innerD(ND_FiManTrunk, PS_Default), L_FiManTrunk, Nu_Water, E_Pvc) + h_e(2*Q_Layer/N_FiManBranch, innerD(ND_FiManBranch, PS_FiBranch), K_PipeEnt) + 2/3*h_f(2*Q_Layer/N_FiManBranch, innerD(ND_FiManBranch, PS_FiBranch), L_FiManBranch[0], Nu_Water, E_Pvc) + 1/3*h_f(2*Q_Fi/N_FiManBranch, innerD(ND_FiManBranch, PS_FiBranch), L_FiManBranch[1], Nu_Water, E_Pvc) + HL_FiSlot
HL_FiInletManifoldTop(Q_Layer) := 1/3*h_f(Q_Layer, innerD(ND_FiManTrunk, PS_Default), L_FiManTrunk, Nu_Water, E_Pvc) + h_e(Q_Layer/N_FiManBranch, innerD(ND_FiManBranch, PS_FiBranch), K_PipeEnt) + 2/3*h_f(Q_Fi/N_FiManBranch, innerD(ND_FiBwManBranch, PS_FiBranch), L_FiManBranch[0], Nu_Water, E_Pvc) + 1/3*h_f(Q_Fi/N_FiManBranch, innerD(ND_FiManBranch, PS_FiBranch), L_FiManBranch[1], Nu_Water, E_Pvc) + HL_FiSlot
HL_FiInletManifoldBottom(Q_Layer) := 1/3*h_f(Q_Layer, innerD(ND_FiBwTrunk, PS_Default), L_FiManTrunk, Nu_Water, E_Pvc) + h_e(Q_Layer/N_FiManBranch, innerD(ND_FiManBranch, PS_FiBranch), K_PipeEnt) + 2/3*h_f(Q_Fi/N_FiManBranch, innerD(ND_FiManBranch, PS_FiBranch), L_FiManBranch[0], Nu_Water, E_Pvc) + 1/3*h_f(Q_Fi/N_FiManBranch, innerD(ND_FiManBranch, PS_FiBranch), L_FiManBranch[1], Nu_Water, E_Pvc) + HL_FiSlot
HL_FiOutletManifold(Q_Layer) := 1/3*h_f(2*Q_Layer, innerD(ND_FiBwTrunk, PS_Default), L_FiManTrunk, Nu_Water, E_Pvc) + h_e(2*Q_Layer/N_FiManBranch, innerD(ND_FiManBranch, PS_FiBranch), K_PipeExit) + 2/3*h_f(Q_Fi/N_FiManBranch, innerD(ND_FiManBranch, PS_FiBranch), L_FiManBranch[0], Nu_Water, E_Pvc) + 1/3*h_f(Q_Fi/N_FiManBranch, innerD(ND_FiManBranch, PS_FiBranch), L_FiManBranch[1], Nu_Water, E_Pvc)
K_ballValve := 0.05
K_tee90 := 1
K_bushing := 0.20
K_checkValve := 2.5
HL_FiInletPlumbing1(Q_Layer) := h_l(Q_Layer, innerD(ND_FiManPipe, PS_Default), L_BottomPipe, 2*K_El90 + K_PipeEnt + K_checkValve + K_bushing, Nu_Water, E_Pvc) + HL_FiInletManifoldTop(Q_Layer)
HL_FiInletPlumbing2(Q_Layer) := h_l(2*Q_Layer, innerD(ND_FiManPipe, PS_Default), L_BottomPipe, K_El90 + K_PipeEnt + K_tee90 + K_bushing + K_checkValve, Nu_Water, E_Pvc) + HL_FiInletManifold(Q_Layer)
HL_FiInletPlumbing3(Q_Layer) := h_l(2*Q_Layer, innerD(ND_FiManPipe, PS_Default), L_BottomPipe, K_El90 + K_PipeEnt + K_tee90 + K_bushing + K_checkValve, Nu_Water, E_Pvc) + HL_FiInletManifold(Q_Layer)
HL_FiInletPlumbing4(Q_Layer) := h_l(Q_Layer, innerD(ND_FiManPipe, PS_Default), L_BottomPipe, K_El90 + K_tee90 + K_bushing + K_PipeEnt, Nu_Water, E_Pvc) + HL_FiInletManifoldBottom(Q_Layer)
HL_FiInletPlumbingMax(Q_1, Q_2, Q_3, Q_4) := max(HL_FiInletPlumbing1(Q_1), HL_FiInletPlumbing2(Q_2), HL_FiInletPlumbing3(Q_3), HL_FiInletPlumbing4(Q_4))
# These are numbered from the top of the filter bed down. The top and bottom inlets have half the flow rate (only serve the layers below and above, respectively). The bottom inlet has the diameter of the backwash trunk.
HL_FiInletPlumbingMin(Q_1, Q_2, Q_3, Q_4) := min(HL_FiInletPlumbing1(Q_1), HL_FiInletPlumbing2(Q_2), HL_FiInletPlumbing3(Q_3), HL_FiInletPlumbing4(Q_4))
HL_FiInletPlumbingAve(Q_1, Q_2, Q_3, Q_4) := (HL_FiInletPlumbing1(Q_1) + HL_FiInletPlumbing2(Q_2) + HL_FiInletPlumbing3(Q_3) + HL_FiInletPlumbing4(Q_4))/4
HL_FiBwInletPlumbing := h_l(Q_Fi, innerD(ND_FiManTrunk, PS_Default), L_BottomPipe, K_El90 + K_tee90 + K_bushing + K_PipeEnt, Nu_Water, E_Pvc) + HL_FiBwInletManifold = 27.7688 cm
HL_FiOutletPlumbing1(Q_Layer) := h_l(2*Q_Layer, innerD(ND_FiManTrunk, PS_Default), L_BottomPipe, K_El90 + K_PipeEnt + K_tee90 + K_bushing + K_checkValve, Nu_Water, E_Pvc) + HL_FiOutletManifold(Q_Layer)
HL_FiOutletPlumbing2(Q_Layer) := HL_FiOutletPlumbing1(Q_Layer)
HL_FiOutletPlumbing3(Q_Layer) := HL_FiOutletPlumbing1(Q_Layer)
HL_FiOutletPlumbingMax(Q_1, Q_3) := max(HL_FiOutletPlumbing1(Q_1), HL_FiOutletPlumbing2(Q_1), HL_FiOutletPlumbing3(Q_3))
HL_FiOutletPlumbingMin(Q_1, Q_3) := min(HL_FiOutletPlumbing1(Q_1), HL_FiOutletPlumbing2(Q_1), HL_FiOutletPlumbing3(Q_3))
HL_FiOutletPlumbingAve(Q_1, Q_3) := (HL_FiOutletPlumbing1(Q_1) + HL_FiOutletPlumbing2(Q_1) + HL_FiOutletPlumbing3(Q_3))/3
# Path Head Loss Calculations and Flow Distribution Between Layers
HL_FiCleanLyr(Q) := h_lKozeny(H_FiLayer, D_FiSand60, Q/A_FiActive, ε_FiSand, Nu_Water)
HL_FiCleanBottomLyr(Q) := h_lKozeny(H_FiBottomLayer, D_FiSand60, Q/A_FiActive, ε_FiSand, Nu_Water)
HL_FiPathClean1(Q_Path) := HL_FiInletPlumbing1(Q_Path) + HL_FiCleanLyr(Q_Path) + HL_FiOutletPlumbing1(Q_Path)
HL_FiPathClean2(Q_Path) := HL_FiInletPlumbing2(Q_Path) + HL_FiCleanLyr(Q_Path) + HL_FiOutletPlumbing1(Q_Path)
HL_FiPathClean3(Q_Path) := HL_FiInletPlumbing2(Q_Path) + HL_FiCleanLyr(Q_Path) + HL_FiOutletPlumbing2(Q_Path)
HL_FiPathClean4(Q_Path) := HL_FiInletPlumbing3(Q_Path) + HL_FiCleanLyr(Q_Path) + HL_FiOutletPlumbing2(Q_Path)
HL_FiPathClean5(Q_Path) := HL_FiInletPlumbing3(Q_Path) + HL_FiCleanLyr(Q_Path) + HL_FiOutletPlumbing3(Q_Path)
HL_FiPathClean6(Q_Path) := HL_FiInletPlumbing4(Q_Path) + HL_FiCleanBottomLyr(Q_Path) + HL_FiOutletPlumbing3(Q_Path)
HL_FiPathCleanMax(Q_1, Q_2, Q_3, Q_4, Q_5, Q_6) := max(HL_FiPathClean1(Q_1), HL_FiPathClean2(Q_2), HL_FiPathClean3(Q_3), HL_FiPathClean4(Q_4), HL_FiPathClean5(Q_5), HL_FiPathClean6(Q_6))
HL_FiPathCleanMin(Q_1, Q_2, Q_3, Q_4, Q_5, Q_6) := min(HL_FiPathClean1(Q_1), HL_FiPathClean2(Q_2), HL_FiPathClean3(Q_3), HL_FiPathClean4(Q_4), HL_FiPathClean5(Q_5), HL_FiPathClean6(Q_6))
# In reality the flow will distribute itself such that all paths have the same head loss. We will treat the average of all of the calculated path head losses as the actual complete head loss accross all paths.
HL_FiPathCleanAve(Q_1, Q_2, Q_3, Q_4, Q_5, Q_6) := (HL_FiPathClean1(Q_1) + HL_FiPathClean2(Q_2) + HL_FiPathClean3(Q_3) + HL_FiPathClean4(Q_4) + HL_FiPathClean5(Q_5) + HL_FiPathClean6(Q_6))/6
Pi_QFiLayer(Q_1, Q_2, Q_3, Q_4, Q_5, Q_6) := sqrt(HL_FiPathCleanMin(Q_1, Q_2, Q_3, Q_4, Q_5, Q_6)/HL_FiPathCleanMax(Q_1, Q_2, Q_3, Q_4, Q_5, Q_6))
# This estimate is reasonable as long as the answer is close to 1
# Guess:
Q_2 := Q_FiLayer
Q_3 := Q_FiLayer
Q_4 := Q_FiLayer
Q_5 := Q_FiLayer
Q_6 := Q_FiLayer
Q_1 := Q_FiLayer
Given
HL_FiPathClean1(Q_1) == HL_FiPathClean2(Q_2)
HL_FiPathClean2(Q_2) == HL_FiPathClean3(Q_3)
Q_1 + Q_2 + Q_3 + Q_4 + Q_5 + Q_6 == Q_Fi
HL_FiPathClean3(Q_3) == HL_FiPathClean4(Q_4)
HL_FiPathClean4(Q_4) == HL_FiPathClean5(Q_5)
HL_FiPathClean5(Q_5) == HL_FiPathClean6(Q_6)
HL_FiPath(Q) := Find(Q_1, Q_2, Q_3, Q_4, Q_5, Q_6)
Q_FiLayer =  # error
Q_FiPath := HL_FiPath(Q_Fi) = [0.153399; 0.126163; 0.126163; 0.126163; 0.126163; 0.141951] L/s
Q_FiLayer1 := Q_FiPath[0]
Q_FiLayer2 := Q_FiPath[1]
HL_FiPathClean1(Q_FiPath[0]) =  # error
Q_FiLayer3 := Q_FiPath[2]
HL_FiPathClean2(Q_FiPath[1]) =  # error
Q_FiLayer4 := Q_FiPath[3]
HL_FiPathClean3(Q_FiPath[2]) =  # error
HL_FiCleanPath := HL_FiPathClean1(Q_FiPath[0])
Q_FiLayer5 := Q_FiPath[4]
HL_FiPathClean4(Q_FiPath[3]) =  # error
Q_FiLayer6 := Q_FiPath[5]
HL_FiPathClean5(Q_FiPath[4]) =  # error
HL_FiPathClean6(Q_FiPath[5]) =  # error
# Slotted Pipe Design
A_FiBwBranchSlots := A_FiBwManSlots/N_FiManBranch = 10.9825 cm^2
# The slots should be configured to provide this total amount of slot area for the
# bottom manifold handling the backwash flow. We will define this as the inner diameter area of the slots
A_FiBranchSlots := A_FiManSlots/N_FiManBranch = 21.9649 cm^2  # This is the amount of slot area that must be available for each length of pipe.
L_FiBwManSlotBranchTotal := A_FiBwBranchSlots/W_FiManSlots = 5.40476 m  # The slots on each pipe must have this total length to provide the required area.
L_FiManSlotBranchTotal := A_FiBranchSlots/W_FiManSlots = 10.8095 m
# We select  B_FiBwManSlot := 3/16*in = 4.7625 mm  for the closest slot spacing, and N_FiBwSlotRows := 1  for best structural integrity of these pipes
# We select  B_FiManSlot := 3/16*in = 4.7625 mm  for the closest slot spacing, and N_FiSlotRows := 2  for best structural integrity of these pipes
N_FiBwManSlotsPerRow := floor((L_FiBwManBranch - 2*L_FiManBranchExt - B_FiBwManSlot)/B_FiBwManSlot)
N_FiManSlotsPerRow := floor((L_FiManBranch - 2*L_FiManBranchExt - B_FiManSlot)/B_FiManSlot) = [12; 16; 12]
N_FiManSlotsPerBranch := N_FiManSlotsPerRow*N_FiSlotRows = [24; 32; 24]
N_FiBwManSlotsPerBranch := N_FiBwManSlotsPerRow*N_FiBwSlotRows
C_FiBwManInner := π*innerdiameter(ND_FiBwManBranch, PS_FiBranch) = 5.05796 in
L_FiBwManSlotCurvedInner := L_FiBwManSlotBranchTotal/N_FiBwManSlotsPerBranch
C_FiManInner := π*innerdiameter(ND_FiManBranch, PS_FiBranch) = 1.95407 in
C_FiBwManOuter := π*outerdiameter(ND_FiBwManBranch) = 5.96903 in
L_FiManSlotCurvedInner := L_FiManSlotBranchTotal/N_FiManSlotsPerBranch = [17.7321; 13.2991; 17.7321] in
C_FiManOuter := π*outerdiameter(ND_FiManBranch) = 2.63894 in
L_FiBwManSlotInner := 2*innerdiameter(ND_FiBwManBranch, PS_FiBranch)/2*sin(2*π*L_FiBwManSlotCurvedInner/C_FiBwManInner/2)
L_FiManSlotInner := 2*innerdiameter(ND_FiManBranch, PS_FiBranch)/2*sin(2*π*L_FiManSlotCurvedInner/C_FiManInner/2) = [-0.366239; 0.904986; -0.366239] cm
H_FiManCenterToSlot := sqrt((innerdiameter(ND_FiManBranch, PS_FiBranch)/2)^2 - (L_FiManSlotInner/2)^2) = [0.768422; 0.647499; 0.768422] cm
H_FiBwManCenterToSlot := sqrt((innerdiameter(ND_FiBwManBranch, PS_FiBranch)/2)^2 - (L_FiBwManSlotInner/2)^2)
L_FiBwManSlotOuter := 2*sqrt(outerradius(ND_FiBwManBranch)^2 - H_FiBwManCenterToSlot^2)
L_FiManSlotOuter := 2*sqrt(outerradius(ND_FiManBranch)^2 - H_FiManCenterToSlot^2) = [1.47999; 1.69565; 1.47999] cm
H_FiBwSlot := outerradius(ND_FiBwManBranch) - H_FiBwManCenterToSlot
H_FiSlot := outerradius(ND_FiManBranch) - H_FiManCenterToSlot = [0.00298378; 0.00419301; 0.00298378] m
N_FiBwManBranchTotal := N_Fi*N_FiManBranch = 9
N_FiManBranchTotal := N_Fi*(N_FiLayer - 1)*N_FiManBranch = 45
# SPECIFICATIONS:  we need  N_FiBwManBranchTotal = pipes of diameter  ND_FiBwManBranch =, with slots of width W_FiManSlots =, straight length L_FiBwManSlotOuter =  and a spacing of  B_FiBwManSlot = 0.1875 in
# SPECIFICATIONS:  we need  N_FiManBranchTotal = pipes of diameter  ND_FiManBranch = 0.5 in  with slots of width  W_FiManSlots =,straight length L_FiManSlotOuter =, and a spacing of B_FiManSlot = 0.1875 in
P_FiBwManBranches := N_FiBwManBranchTotal*L_FiBwManBranch*(12*USD/(5 ft)) = USD
P_FiManBranches := N_FiManBranchTotal*L_FiManBranch*(9*USD/(5 ft)) = [27.2157; 32.1841; 27.2157] USD
# Siphon Design
L_FiSiphonEst := L_BWOutlet + L_BWHoriz
K_FiSiphon := 2*K_El90 + K_PipeEnt + K_PipeExit = 3.3  # Minor loss coefficients for flow through the siphon. The tee is treated as an extra elbow
# Siphon has to handle the entire flow into the filter plus drain the terminal head in Ti.FiBwInitiation.  This is approximately a "hole in a bucket problem" so the average flow rate is half the max flow (hence the factor of 2).  The HL sum corresponds to the height of water that needs to be drained. Use maximum head loss through the siphon for conservative estimate.
Q_FiSiphonInitiation := Q_Fi + 2*A_FiActive*(HL_FiBwSF + H_FiForwardNoSuckAir + HL_FiDirty + HL_FiBwInletPlumbing + HL_FiBwSS + HL_FiSiphonMax - H_FiSiphonNoSuckAir)/Ti_FiBwInitiationBod = 2.63939 L/s
HL_FiSiphonMax := 30 cm
HL_FiSiphonInitiationMax := HL_FiBwSF + H_FiForwardNoSuckAir + HL_FiDirty + HL_FiBwInletPlumbing + HL_FiBwSS + HL_FiSiphonMax - H_FiSiphonNoSuckAir = 2.37625 m
HL_FiSiphonPipe := h_l(Q_Fi, innerdiameter(ND_FiBW, PS_Default), L_FiSiphonEst, K_FiSiphon, Nu_Water, E_Pvc) = 6.53859 cm
HL_FiSiphonOutlet := Headloss_weir(Q_Fi, innerD(ND_FiBW, PS_Default)) = 4.56866 cm
D_FiSiphonManOrifices := innerdiameter(ND_FiBW, PS_Default) = 0.0440436 m
HL_FiSiphonOrifice := h_orifice(D_FiSiphonManOrifices, Pi_VenaContractaOrifice, Q_Fi) = 3.54191 cm
HL_FiBwTotalSS := max(HL_FiBwInletPlumbing + HL_FiBwSS + HL_FiSiphonOrifice + HL_FiSiphonPipe + HL_FiSiphonOutlet, 200 cm) = 2 m
Rho_FiFluidized := Rho_H2O*ε_FiSand*Pi_FiFluidized + Rho_FiSand*(1 - ε_FiSand)/Pi_FiFluidized = 1743.08 kg/m^3
# Entrance Pipe from Sedimentation
# see sedimentation tank code
# Elevations
ZW_FiInlet := Z_SedLaunder - h_e(Q_Fi, innerD(ND_SedLaunder, PS_FiBranch), K_PipeEnt + K_PipeExit + K_El90) = 1.55214 m
# Water drops straight into the inlet from the launder by a 90 deg elbow
Z_FiBottom := ZW_FiInlet - HL_FiBwTotalSS = -0.447864 m
# Assuming that the backwash pipe exit is at the bottom of the filter, the bottom of the filter should be located the total backwash headloss (usually 200cm) below the inlet
# Inlet Channel Design
L_FiInletChannel := (N_Fi - 1)*S_Fi + 2*(S_Fitting + ConRadius(ND_FiManPipe)) = 1.79666 m
HL_FiEntranceWeir := Headloss_weir(Q_Fi, L_FiInletChannel)
ZW_FiInletChannel := HW_Sed - HL_FiEntranceWeir = 1.58944 m
Z_FiEntranceWeir := ZW_FiInletChannel - HL_FiEntranceWeir = 1.58559 m
ZW_FiEntranceMax := Z_FiEntranceWeir - H_FiWeirFreefall = 1.55559 m
Z_FiInletChannelBottom := Z_FiBottom + L_FiBodyPipe = 1.38094 m
H_FiInletChannel := H_Sed - Z_FiInletChannelBottom = 0.336655 m
HW_FiInletChannel := ZW_FiInletChannel - Z_FiInletChannelBottom = 0.208506 m
Pi_QFi := 0.97
HL_FiInletChannel := Headloss_weir(Q_Fi, L_FiInletChannel) - Headloss_weir(Q_Fi*Pi_QFi, L_FiInletChannel) = 0.00774981 cm
W_FiInletChannelFlowDist := W_HorizChannel(Q_Plant, HW_FiInletChannel, HL_FiInletChannel, L_FiInletChannel, Nu_Water, E_Concrete, 0) = 0.321617 m
W_FiInletChannel := max(W_FiInletChannelFlowDist, W_FiInletChannelMin) = 0.321617 m
S_FiEntranceBaffle := ((Q_Plant/T_PlantWall)^2/g)^(1/3)
S_FiBaffleToBlock := ((Q_Plant/T_PlantWall)^2/g)^(1/3)
W_FiAirRemovalBlock := T_SedWeir
ZW_FiEntranceBwSS := Z_FiInletChannelBottom + H_FiBwNoSuckAir = 1.58094 m
Z_FiAirRemovalBlockBottom := 0.15*S_FiEntranceBaffle + Z_FiInletChannelBottom
Z_FiAirRemovalBlockTop := ZW_FiEntranceBwSS - H_FiAirRemovalBlockSubmerged = 1.53094 m
# Main Plant Drain Channel
# To calculate the maximum possible flow through the drainchannel, all tanks are assumed to be initially full and emptying in the same time
# Note that the tank heights are used instead of the water levels in the calculation of maximum flow to have a conservative design.
W_PlantDC := 1 m
Q_TankDrainMax := Q_pipeminor(innerdiameter(ND_EtDrain, PS_Default), H_Et, K_PipeEnt + K_PipeExit)*2 + Q_pipeminor(innerdiameter(ND_FlocValve, PS_Default), H_Floc, K_PipeEnt + K_PipeExit)*1 + Q_pipeminor(innerdiameter(ND_SedSludgePipe, PS_Default), HW_Sed, K_PipeEnt + K_PipeExit)*N_SedBays*N_SedTanks
Q_PlantDCMax := Q_TankDrainMax + N_Fi*(1 + N_Fi > 1)*Q_Fi = 47.3749 L/s
H_DrainChannelMax := 1 m
Q_pipeminor(innerdiameter(ND_SedSludgePipe, PS_Default), HW_Sed, K_PipeEnt + K_PipeExit) = L/s
L_PlantDC := W_Sed + 4*T_PlantWall + L_Floc + W_Et + W_HumanMin + W_FiInletChannel + 2*T_SedWeir = 3.39669 m
ND_PlantDC := NominalDiameter(D_PipeTotal(Q_PlantDCMax, H_DrainChannelMax, L_PlantDC, Nu_Water, E_Concrete, K_PipeEnt + K_PipeExit), PS_Default) = 6 in
ND_PlantSideDC := NominalDiameter(D_PipeTotal(N_Fi*(1 + N_Fi > 1)*Q_Fi, H_DrainChannelMax, L_PlantDC, Nu_Water, E_Concrete, K_PipeEnt + K_PipeExit), PS_Default) = 1.5 in
Z_PlantDCBottom := Z_FiBottom - H_DrainChannelMax = -1.44786 m
