# Lamella Design
H_SedAbove := outerdiameter(ND_SedLaunder) + HL_SedLaunder
B_SedPlateHorizontal := B_SedPlateMin/sin(AN_SedPlate)
S_SedPlate := B_SedPlateMin - T_SedPlate
L_SedPlateEst :=
    L1 ← HW_InletChannel*cos(AN_SedPlate)
    L2 ← 0 m
    while |L1 - L2| > 0.01 m
        L_Inactive ← L1*cos(AN_SedPlate) + W_InletChannel + W_ExitChannel + 2*T_ChannelWall
        V_Up ← Q_Sed/(W_Sed*(L_Sed - L_Inactive))
        L2 ← (B_SedPlateMin*(V_Up/V_SedCBod - 1) + T_SedPlate)/(sin(AN_SedPlate)*cos(AN_SedPlate))
        L1 ← L2
    return L1
L_SedPlate := L_SedPlateSheet/floor(L_SedPlateSheet/L_SedPlateEst)
L_SedInactive := L_SedPlate*cos(AN_SedPlate) + W_InletChannel + W_ExitChannel + 2*T_ChannelWall
L_SedActiveMax := L_Sed - L_SedInactive
V_SedUpActiveBelow := Q_Sed/(W_Sed*(L_Sed - L_SedInactive))
B_SedPlate := (L_SedPlate*sin(AN_SedPlate)*cos(AN_SedPlate) - T_SedPlate)/(V_SedUpActiveBelow/V_SedCBod - 1)
B_SedPlateHorizontal := B_SedPlate/sin(AN_SedPlate)
N_SedPlates := ceil(L_SedActiveMax/B_SedPlateHorizontal) + 1
H_SedPlate := L_SedPlate*cos(AN_SedPlate)
# Now calculate actual values of all parameters!
L_SedActive := L_Sed - L_SedInactive - N_SedPlates*B_SedPlateHorizontal
# Number of spaces where water is traveling is one less than the number of plates used to create those spaces
V_SedUp := Q_Sed/(L_Sed*W_Sed)
V_SedUpActive := Q_Sed/(L_SedActive*W_Sed)
V_SedC := V_SedUpActive/(1 + L_SedPlate/S_SedPlate*cos(AN_SedPlate)*sin(AN_SedPlate))
HW_Sed := max(Z_SedSlopes + H_SedBetween + 2*outerdiameter(ND_SedPlateFrame) + H_SedPlate + H_SedAbove, H_SedManifoldPort + H_SedBetween + T_ChannelWall + H_InletChannel)
H_Sed := HW_Sed + H_PlantFreeboard
Z_Mp := HW_Sed - HW_InletChannel
Z_SedLaunder := HW_Sed - HL_SedLaunder - outerradius(ND_SedLaunder)
ZW_ExitChannel := HW_Sed - HL_SedLaunder
H_SedBayDivider := HW_Sed - H_SedAbove - outerdiameter(ND_SedLaunder) - H_SedPlate - 2*outerdiameter(ND_SedPlateFrame)
W_SedBayDivider := T_ChannelWall
N_SedPorts := floor((L_Sed - W_InletChannel - T_ChannelWall)/W_SedSlopePlate)
W_SedSlopePlateRemaining := L_Sed - N_SedPorts*W_SedSlopePlate  # This is the extra space left at the end of the sed tank that will not fit another slope plate
