Matrix1 := [1 m, 2 m, 3 m]
# [reference: EtFlocSedFi.xmcd]
# New PipeF Function Code
PipeF(OriginPoint, Length, AngleVector, ND, EN, Matrix1) :=
    PipeOuter ← cylinderD(OriginPoint, outerradius(ND), OriginPoint - [Length; 0 m; 0 m])
    PipeInner ← cylinderD(OriginPoint + [zc; 0 m; 0 m], innerdiameter(ND, EN)/2, OriginPoint - [Length + zc; 0 m; 0 m])
    Zoom ← ZoomWindow([OriginPoint[0] - Length - zc; OriginPoint[1] - outerradius(ND) - zc; OriginPoint[2]], [OriginPoint[0] - Length + zc; OriginPoint[1] + outerradius(ND) + zc; OriginPoint[2]])
    SubtractInner ← SubtractGeneral([[OriginPoint[0] - Length; OriginPoint[1] + outerradius(ND); OriginPoint[2]]], [[OriginPoint[0] - Length - zc; OriginPoint[1] + innerdiameter(ND, EN)/2; OriginPoint[2]]])
    Rotate ← [Rotate3DLast(OriginPoint, "z", AngleVector[0]); Rotate3DLast(OriginPoint, "y", AngleVector[1])]
    Final ← stack(PipeOuter, PipeInner, Zoom, SubtractInner)
    for i ∈ 0 .. 1
        Final ← stack(Final, Rotate[i]) if AngleVector[i] ≠ 0
    EN_Units ← EN*m
    NewLine ← stack(Length, ND, EN_Units)
    n ← rows(Matrix1)
    for i ∈ 0 .. 2
        Matrix1[:, i][n] ← NewLine[i]
    return [Final; Matrix1]
Matrix1[:, 0][0] = 1 m
# Results of New PipeF Function
Pipe1 := PipeF([0; 0; 0], 15 m, [90; 0; 0]*deg, 1/8*in, PS_Default, Matrix1)
Pipe1 = [
    ["_cylinder 0,0,0 0 a -15,0,0"; "_cylinder 0.01,0,0 0 a -15.01,0,0"; "_zoom w -15.01,-0.01,0 -14.99,0.01,0"; "_subtract -15,0,0  -15.01,0,0 "; "rotate3d l  z 0,0,0 90"]; [1, 2, 3; 15, 0.003175, 8]
] m
Pipe1[0] = ["_cylinder 0,0,0 0 a -15,0,0"; "_cylinder 0.01,0,0 0 a -15.01,0,0"; "_zoom w -15.01,-0.01,0 -14.99,0.01,0"; "_subtract -15,0,0  -15.01,0,0 "; "rotate3d l  z 0,0,0 90"] m
Pipe1[1] = [1, 2, 3; 15, 0.003175, 8] m
# Smaller Version of New PipeF Function
Matrix := [5 m, 4 m, 3 m, 2 m]
MatrixBuild(Length, ND, EN, N, Matrix) :=
    EN_Units ← EN*m
    N_Units ← N*m
    NewLine ← stack(Length, ND, EN_Units, N_Units)
    n ← rows(Matrix)
    for i ∈ 0 .. 3
        Matrix[:, i][n] ← NewLine[i]
    return Matrix
Matrix := MatrixBuild(15 m, 1/8*in, PS_Default, 5, Matrix)
Matrix = [5, 4, 3, 2; 15, 0.003175, 8, 5] m
# Example Matrix
10 in = 0.254 m
MatrixUse := [
    15, 3.175*10^-3, 8, 5;
    3, 3.175*10^-3, 8, 1;
    2, 6.35*10^-3, 0, 1;
    5.4, 0.019, 1, 1;
    6.1, 0.203, 1, 1;
    2.3, 0.254, 8, 3;
    4.5, 3.175*10^-3, 8, 4;
    0.7, 3.175*10^-3, 8, 2;
    0.8, 0.051, 8, 15;
    0.55, 0.051, 8, 10;
    1.2, 0.127, 8, 3;
    2.2, 0.203, 8, 2;
    2.3, 0.019, 8, 1;
    5, 6.35*10^-3, 8, 1;
    5.1, 9.525*10^-3, 2, 1;
    3.2, 0.203, 8, 1;
    7.1, 0.089, 8, 1;
    9.2, 6.35*10^-3, 2, 1;
    10.4, 6.35*10^-3, 8, 2;
    4, 0.089, 1, 3
]*m  # Sort matrix for same ND and Pipespec
# Put rows with same lengths together
# Example Matrix
MatrixUse[:, 0] = [15; 3; 2; 5.4; 6.1; 2.3; 4.5; 0.7; 0.8; 0.55; 1.2; 2.2; 2.3; 5; 5.1; 3.2; 7.1; 9.2; 10.4; 4] m
# Lances Calculation Code
# Lance Length:
Lance := 6.1 m
LanceUsable := Lance - 0.60 m
MatrixUse = [
    15, 0.003175, 8, 5;
    3, 0.003175, 8, 1;
    2, 0.00635, 0, 1;
    5.4, 0.019, 1, 1;
    6.1, 0.203, 1, 1;
    2.3, 0.254, 8, 3;
    4.5, 0.003175, 8, 4;
    0.7, 0.003175, 8, 2;
    0.8, 0.051, 8, 15;
    0.55, 0.051, 8, 10;
    1.2, 0.127, 8, 3;
    2.2, 0.203, 8, 2;
    2.3, 0.019, 8, 1;
    5, 0.00635, 8, 1;
    5.1, 0.009525, 2, 1;
    3.2, 0.203, 8, 1;
    7.1, 0.089, 8, 1;
    9.2, 0.00635, 2, 1;
    10.4, 0.00635, 8, 2;
    4, 0.089, 1, 3
] m
LanceUsable = 5.5 m
# Get rid of pipes that are longer than lance length:
PipesTooLong(MatrixUse) :=
    n ← 0
    for i ∈ 0 .. rows(MatrixUse) - 1
        if MatrixUse[:, 0][i] > LanceUsable
            Matrix[n] ← transpose(transpose(MatrixUse)[:, i])
            n ← n + 1
            MatrixUse[:, 0][i] ← 0
    return [Matrix; MatrixUse]
# Example Matrix after sorting:
# Resulting Matrix that are longer than lance length
# Sort matrix by pipe spec
MatrixUseWithGoodPipes := csort(PipesTooLong(MatrixUse)[1], 2)
PipesTooLong(MatrixUse)[0] = [
    [15, 0.003175, 8, 5]; [6.1, 0.203, 1, 1]; [7.1, 0.089, 8, 1]; [9.2, 0.00635, 2, 1]; [10.4, 0.00635, 8, 2]
] m
# Divide Matrix into SubMatrices depending on pipe spec (finish separating matrices)
DivideMatrix(MatrixUseWithGoodPipes) :=
    for i ∈ rows(MatrixUseWithGoodPipes) - 1
        if {
            MatrixUseWithGoodPipes[:, 1][i] == MatrixUseWithGoodPipes[:, 1][i - 1]
            MatrixUseWithGoodPipes[:, 2][i] == MatrixUseWithGoodPipes[:, 2][i - 1]
        }
            □
    return Matrix  # error: This placeholder is empty.
MatrixUseWithGoodPipes = [
    2, 0.00635, 0, 1;
    0, 0.203, 1, 1;
    5.4, 0.019, 1, 1;
    4, 0.089, 1, 3;
    5.1, 0.009525, 2, 1;
    0, 0.00635, 2, 1;
    4.5, 0.003175, 8, 4;
    2.2, 0.203, 8, 2;
    2.3, 0.254, 8, 3;
    1.2, 0.127, 8, 3;
    0.55, 0.051, 8, 10;
    2.3, 0.019, 8, 1;
    5, 0.00635, 8, 1;
    0.8, 0.051, 8, 15;
    0, 0.089, 8, 1;
    3.2, 0.203, 8, 1;
    0.7, 0.003175, 8, 2;
    0, 0.00635, 8, 2;
    3, 0.003175, 8, 1;
    0, 0.003175, 8, 5
] m
# Find longest pipe:
PipeLengthLongest := max(MatrixUseWithGoodPipes[:, 0])
PipeLengthLongest = 5.4 m
PipeLongest := match(max(MatrixUseWithGoodPipes[:, 0]), MatrixUseWithGoodPipes[:, 0])
# What length of lance is left?
LanceLeft := LanceUsable - PipeLengthLongest
# Find the next longest pipe:
NextPipeLength :=
    n ← 0
    for i ∈ 0 .. rows(MatrixUseWithGoodPipes) - 1
        if MatrixUseWithGoodPipes[:, 0][i] ≤ LanceLeft
            VectorOfPossiblePipes[n] ← MatrixUseWithGoodPipes[:, 0][i]
            n ← n + 1
    return max(VectorOfPossiblePipes)
# start a new matrix with a specific ND and PipeSpec
# cycle through rows to find all pipes with that ND and PipeSpec
# when all rows have been found, start a new matrix with a different ND and PipeSpec
# do this until all pipes have been accounted for
# Write in part of the code for ending the lance and starting a new one
# Apply to do all of them (cycle through all the matrix until all the pipes are used)
