Q_Plant := 55*L/s  # define flow rate here
# [reference: ExpertInputs.xmcd]
# [reference: MathFunctions.xmcd]
# [reference: PipeDatabase.xmcd]
# [reference: FluidsFunctions.xmcd]
# [reference: SedimentationTank.xmcd]
# [reference: Flocculator.xmcd]
# [reference: LFOM.xmcd]
# [reference: EntranceTank.xmcd]
# [reference: StackedRapidSandFilter.xmcd]
# Monroe's reflections on this file and on our CDC design.
#
# I previously thought that we would develop a basic design for the CDC and that we would alway use 1/8" tubing. It is now clear that it is necessary to use different diameters of tubing to get a reasonable range of plant flow rates. This means that we will need to find appropriate fittings for several different sizes of tubing. We need to create designs for the different versions of CDC and ideally we should find a way to reduce the number of different systems that we manufacturer.
# We are currently constrained with the length of the doser tubing based on the distance to the floor. We could remove a section of the floor and have the tubing extend into the drain channel. However, it is necessary to almost double the length of the tubing to be able to use the next size up in tubing diameter.
# Chlorination is a challenge because the stock needs to be dilute enough so that it doesn't decay rapidly and the viscosity of the dilute solutions is close to that of water (do we have data for this?). One way to reduce the length of the tubing required is to reduce the driving head. It might be reasonable to reduce the driving head for the chlorinator to 10 cm. I have made this change. This cuts the tubing length in half as well.
# We should calculate the required L/D ratio for keeping the nonlinear error small.
# The algorithm produces a nicer sequence of number and diameter of tubing if we allow 2.5 m long tubes, and the results are different for PACl and Alum.
# Before creating a full set of doser designs we should review our design options and see which parameters we could tweak to get a nicer set of doser designs. We should also investigate likely maximum dosages for PACl and Alum.
# Design algorithm
# Select the design that has the fewest tubes
# Use 1/8" as the smallest tubing to minimize surface tension effects
# Make sure tubing is shorter than max allowed
# Make sure minor loss errors are low enough.
# Linear Chemical Dose Controller
# Maximum Tube Length to Span the Walkway without Hitting the Floor
L_TubeDrape := 0.25 m  # add this length to short tubes so that they drape nicely
D_CdcTubeWeight := 4 in
H_CdcTubeLong := ZW_CdcCht - Z_Walkway - D_CdcTubeWeight/2 = 1.12097 m
H_CoagCdcTubeShort := Z_EtTop + H_DoserAssembly - Z_Walkway - HL_CoagCdc - D_CdcTubeWeight/2 = 0.920968 m
X_TubeDrape := W_PlantDC*H_CoagCdcTubeShort/(H_CdcTubeLong + H_CoagCdcTubeShort)
H_CdcTubeLong/(W_PlantDC - x) == H_CdcTubeShort/x
L_CoagCdcTubeMax := sqrt(H_CdcTubeLong^2 + (W_PlantDC - X_TubeDrape)^2) + sqrt(H_CoagCdcTubeShort^2 + X_TubeDrape^2) = 2.27365 m  # slight underestimate
L_CoagCdcTubeMin := sqrt((H_DoserAssembly + HL_CoagCdc)^2 + W_PlantDC^2) + L_TubeDrape
H_ChlorCdcTubeShort := Z_EtTop + H_DoserAssembly - Z_Walkway - HL_ChlorCdc - D_CdcTubeWeight/2 = 1.02097 m
L_ChlorCdcTubeMax := sqrt(H_CdcTubeLong^2 + (W_PlantDC - X_TubeDrape)^2) + sqrt(H_ChlorCdcTubeShort^2 + X_TubeDrape^2) = 2.36433 m
L_ChlorCdcTubeMin := sqrt((H_DoserAssembly + HL_ChlorCdc)^2 + W_PlantDC^2) + L_TubeDrape
# use the minimums later to calculate the length of "connector tubes" (larger diameter tubes connected to the design tube, adding the necessary length to reach the drop tube). We will need to create a database of reducing barb fittings to figure out the next larger diameter tube we can use, and report that in the design specs.
# Functions for Coagulant Viscosities and Selecting Available Tube Diameters
D_TubeAvailable :=
    D ← D_TubeMetric if EN_TubeSeries
    D ← D_TubeEnglish otherwise
    return D
D_TubeAvailable = [2.38125; 3.175; 3.96875; 4.7625; 6.35; 7.9375] mm
Nu_Alum(C_Alum) := (1 + 4.255*10^-6*(C_Alum/(kg/m^3))^2.289)*Nu_Water
Nu_PACl(C_PACl) := (1 + 2.383*10^-5*(C_PACl/(kg/m^3))^1.893)*Nu_Water
Nu_Coag(C_Coag, EN_Chem) :=
    Nu ← Nu_Alum(C_Coag) if EN_Chem == 0
    Nu ← Nu_PACl(C_Coag) if EN_Chem == 1
    Nu ← Nu_Water if EN_Chem == 2
    return Nu
# Flow Rate Constraints for Laminar Tube Flow, Deviation from Linear Head Loss Behavior, and Lowest Possible Flow
# Maximum flow that can be put through a tube of a given diameter without exceeding the allowable deviation from linear head loss behavior
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Q_MaxError(D, HL_Cdc) := π*D^2*sqrt((1 - Π_LinearCdcError)*HL_Cdc*g/(8*K_CdcTube*(1/Π_LinearCdcError)))
Q_Available(D_TubeAvailable, HL) := floor(10*Q_MaxError(D_TubeAvailable, HL)/(mL/s))*mL/s/10  # round for convenient flow values
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# Length of Tubing Required Given Head Loss, Max Flow, and Diameter
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# Length of tube required to get desired head loss at maximum flow based on the Hagen-Poiseuille equation.
L_Tube(Q, D, HL, ν, K_Minor) := (HL*g*π*D^4/Q - K_Minor*8*Q/π)/(128*ν)
L == (HL - K_Minor*8*Q^2/(g*π^2*D^4))*g*π*D^4/(128*ν*Q)
N_CdcTubes(Q_Plant, C_DoseMax, C_ChemStock, D_CdcTube, HL) := ceil(Q_Plant*C_DoseMax/(C_ChemStock*Q_Available(D_CdcTube, HL)))
Q_ChemStock(Q_Plant, C_DoseMax, C_ChemStock, D_CdcTube, HL) := Ceil(Q_Plant*C_DoseMax/C_ChemStock, Q_Available(D_CdcTube, HL))
C_ChemStockArray(Q_Plant, C_DoseMax, C_StockMax, D_TubeAvailable, HL) := 1/Ceil(1/C_StockMax, Q_Available(D_TubeAvailable, HL)/(Q_Plant*C_DoseMax))
C_ChemStockArray == C_CoagDoseMax*Q_Plant/Q_ChemStockArray
# Choose the tube that is shorter than the maximum length tube
L_CdcTube(Q_Plant, C_DoseMax, C_StockMax, D_TubeAvailable, HL, EN_Coag, K_CdcTube) := L_Tube(Q_Available(D_TubeAvailable, HL), D_TubeAvailable, HL, Nu_Coag(1/Ceil(1/C_StockMax, Q_Available(D_TubeAvailable, HL)/(Q_Plant*C_DoseMax)), EN_Coag), K_CdcTube)
# Find the index of that tube
i_Cdc(Q_Plant, C_DoseMax, C_StockMax, D_TubeAvailable, HL, L_CdcTubeMax, EN_Coag, K_CdcTube) := match(FloorNearest(L_CdcTubeMax, L_CdcTube(Q_Plant, C_DoseMax, C_StockMax, D_TubeAvailable, HL, EN_Coag, K_CdcTube)), L_CdcTube(Q_Plant, C_DoseMax, C_StockMax, D_TubeAvailable, HL, EN_Coag, K_CdcTube))[0]
Q_Plant := 120*L/s
# Main Coagulant Small-Diameter Tube Design
L_CoagCdcTube := FloorNearest(L_CoagCdcTubeMax, L_CdcTube(Q_Plant, C_CoagDoseMax, C_CoagStockMax, D_TubeAvailable, HL_CoagCdc, EN_Coag, K_CdcTube)) = 2.22901 m
C_CoagStock := C_ChemStockArray(Q_Plant, C_CoagDoseMax, C_CoagStockMax, D_TubeAvailable, HL_CoagCdc)[i_Cdc(Q_Plant, C_CoagDoseMax, C_CoagStockMax, D_TubeAvailable, HL_CoagCdc, L_CoagCdcTubeMax, EN_Coag, K_CdcTube)] = 370.656 kg/m^3
D_CdcCoag := D_TubeAvailable[i_Cdc(Q_Plant, C_CoagDoseMax, C_CoagStockMax, D_TubeAvailable, HL_CoagCdc, L_CoagCdcTubeMax, EN_Coag, K_CdcTube)] = 0.1875 in
Q_CoagStock := Q_ChemStock(Q_Plant, C_CoagDoseMax, C_CoagStock, D_CdcCoag, HL_CoagCdc) = 29.6 mL/s
1/Ceil(1/C_CoagStockMax, Q_Available(D_TubeAvailable, HL_CoagCdc)/(Q_Plant*C_CoagDoseMax)) = [395.062; 400; 384; 370.656; 363.636; 310.68] gm/L
N_CoagCdcTubes := N_CdcTubes(Q_Plant, C_CoagDoseMax, C_CoagStock, D_CdcCoag, HL_CoagCdc) = 7
Q_PlantGraph := 3*L/s, 4*L/s .. 100*L/s
# 0 is alum
# 1 is PACl
# 2 is water
C_CoagStockMax = 400 kg/m^3
EN_CoagGraph := EN_Coag
h_e(Q_CoagStock/N_CoagCdcTubes, D_CdcCoag, K_CdcTube) = 0.022983 m
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h_l(Q_CoagStock/N_CoagCdcTubes, D_CdcCoag, L_CoagCdcTube, K_CdcTube, Nu_Coag(C_CoagStock, EN_Coag), 15 mm) = 0.231444 m
h_f(Q_CoagStock/N_CoagCdcTubes, D_CdcCoag, L_CoagCdcTube, Nu_Coag(C_CoagStock, EN_Coag), 15 mm) = 0.208461 m
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# Chlorine Small-Diameter Tube Design
# Because we assume that the viscosity of the chlorine solution is constant (equal to that of water), the tube length and diameter are independent of plant flow rate.
L_ChlorCdcTube := FloorNearest(L_ChlorCdcTubeMax, L_CdcTube(Q_Plant, C_ChlorineDoseMax, C_ChlorineStockMax, D_TubeAvailable, HL_ChlorCdc, 2, K_CdcTube)) = 2.04846 m
C_ChlorStock := C_ChemStockArray(Q_Plant, C_ChlorineDoseMax, C_ChlorineStockMax, D_TubeAvailable, HL_ChlorCdc)[i_Cdc(Q_Plant, C_ChlorineDoseMax, C_ChlorineStockMax, D_TubeAvailable, HL_ChlorCdc, L_ChlorCdcTubeMax, 2, K_CdcTube)] = 43.6364 kg/m^3
D_CdcChlor := D_TubeAvailable[i_Cdc(Q_Plant, C_ChlorineDoseMax, C_ChlorStock, D_TubeAvailable, HL_ChlorCdc, L_ChlorCdcTubeMax, 2, K_CdcTube)]
D_CdcChlor = 4 in/32
Q_ChlorStock := Q_ChemStock(Q_Plant, C_ChlorineDoseMax, C_ChlorStock, D_CdcChlor, HL_ChlorCdc) = 5.5 mL/s
N_ChlorCdcTubes := N_CdcTubes(Q_Plant, C_ChlorineDoseMax, C_ChlorStock, D_CdcChlor, HL_ChlorCdc) = 5
# Filter Coagulant Small-Diameter Tube Design
# This will be deleted as soon as the drawing code is updated. Deleting it now will cause a lot of the drawing to fail!!!
L_FiCoagCdcTube := FloorNearest(L_CoagCdcTubeMax, L_CdcTube(Q_Plant, C_FilterCoagDoseMax, C_CoagStockMax, D_TubeAvailable, HL_CoagCdc, EN_Coag, K_CdcTube)) = 1.43918 m
Q_FiCoagStock := Q_ChemStockArray(Q_Plant, C_FilterCoagDoseMax, C_CoagStockMax, D_TubeAvailable, HL_CoagCdc)[i_Cdc(Q_Plant, C_FilterCoagDoseMax, C_CoagStockMax, D_TubeAvailable, HL_CoagCdc, L_CoagCdcTubeMax, EN_Coag, K_CdcTube)]
D_CdcFiCoag := D_TubeAvailable[i_Cdc(Q_Plant, C_FilterCoagDoseMax, C_CoagStockMax, D_TubeAvailable, HL_CoagCdc, L_CoagCdcTubeMax, EN_Coag, K_CdcTube)] = 3 in/32
N_FiCoagCdcTubes := N_TubeArray(Q_Plant, C_FilterCoagDoseMax, C_CoagStockMax, D_TubeAvailable, HL_CoagCdc)[i_Cdc(Q_Plant, C_FilterCoagDoseMax, C_CoagStockMax, D_TubeAvailable, HL_CoagCdc, L_CoagCdcTubeMax, EN_Coag, K_CdcTube)]
C_FiCoagStock := C_ChemStockArray(Q_Plant, C_FilterCoagDoseMax, C_CoagStockMax, D_TubeAvailable, HL_CoagCdc)[i_Cdc(Q_Plant, C_FilterCoagDoseMax, C_CoagStockMax, D_TubeAvailable, HL_CoagCdc, L_CoagCdcTubeMax, EN_Coag, K_CdcTube)] = 80 kg/m^3
# Need the following...
# Select connectors/adaptors required.
# Main Coagulant CHT Float Valve Design
D_CoagFloatValveOrifice :=
    i ← 0
    while h_orifice(D_FltVlvOrificesAvail[i], Pi_VenaContractaOrifice, Q_CoagStock) ≥ H_CoagTankAboveHeadTank
        i ← i + 1
    return D_FltVlvOrificesAvail[i]
D_CoagFloatValveOrifice = 0.25 in
HL_CoagFloatValveOrifice := h_orifice(D_CoagFloatValveOrifice, Pi_VenaContractaOrifice, Q_CoagStock) = 11.5871 cm
L_TubeStockToCHEst := 1 m
HL_CoagTubeStockToCHMax := H_CoagTankAboveHeadTank - HL_CoagFloatValveOrifice = 18.4129 cm
D_CoagTubeStockToCHEst := (128*Nu_Water*L_TubeStockToCHEst*Q_CoagStock/(π*g*HL_CoagTubeStockToCHMax))^(1/4) = 0.200144 in
D_CoagTubeStockToCH := max(3/8*in, D_CoagTubeStockToCHEst) = 0.375 in
# Use 3/8" tubing to connect the stock tank/calibration column to the constant head tank unless a larger tube is needed (which it probably never will be).
# Chlorine CHT Float Valve Design
D_ChlorFloatValveOrifice :=
    i ← 0
    while h_orifice(D_FltVlvOrificesAvail[i], Pi_VenaContractaOrifice, Q_ChlorStock) ≥ H_CoagTankAboveHeadTank
        i ← i + 1
    return D_FltVlvOrificesAvail[i]
D_ChlorFloatValveOrifice = 0.093 in
HL_ChlorFloatValveOrifice := h_orifice(D_ChlorFloatValveOrifice, Pi_VenaContractaOrifice, Q_ChlorStock) = 20.8903 cm
HL_ChlorTubeStockToCHMax := H_CoagTankAboveHeadTank - HL_ChlorFloatValveOrifice = 9.10969 cm
D_ChlorTubeStockToCHEst := (128*Nu_Water*L_TubeStockToCHEst*Q_ChlorStock/(π*g*HL_ChlorTubeStockToCHMax))^(1/4) = 0.156681 in
D_ChlorTubeStockToCH := max(3/8*in, D_ChlorTubeStockToCHEst) = 0.375 in
# Use 3/8" tubing to connect the stock tank/calibration column to the constant head tank unless a larger tube is needed (which it probably never will be).
# Filter Coagulant CHT Float Valve Design
D_FilterCoagFloatValveOrifice :=
    i ← 0
    while h_orifice(D_FltVlvOrificesAvail[i], Pi_VenaContractaOrifice, Q_FiCoagStock) ≥ H_CoagTankAboveHeadTank
        i ← i + 1
    return D_FltVlvOrificesAvail[i]
D_FilterCoagFloatValveOrifice =  # error: This variable is undefined.
HL_FilterCoagFloatValveOrifice := h_orifice(D_FilterCoagFloatValveOrifice, Pi_VenaContractaOrifice, Q_FiCoagStock)
HL_FilterCoagTubeStockToCHMax := H_CoagTankAboveHeadTank - HL_FilterCoagFloatValveOrifice
D_FilterCoagTubeStockToCHEst := (128*Nu_Water*L_TubeStockToCHEst*Q_FiCoagStock/(π*g*HL_FilterCoagTubeStockToCHMax))^(1/4)
D_FilterCoagTubeStockToCH := max(3/8*in, D_CoagTubeStockToCHEst) = 0.375 in
# Use 3/8" tubing to connect the stock tank/calibration column to the constant head tank unless a larger tube is needed (which it probably never will be).
# Lever Arm Scale
L_LeverArmTotal := 36 in
L_SliderEffective := 3.5 in  # Distance between the end of the slider and the pivot point of the freefall PVC tube.
L_LeverArmEffective := L_LeverArmTotal - L_SliderEffective
L_CdcFloatArm := L_LeverArmEffective/(1 + HL_CoagCdc/HL_Flowmeasure)
# To find the length of the side of the arm with the scale and the side of the arm with the float attached, solve two equations for two unknowns. One equation is similar triangles at maximum flow. The other is that the two sides of the bar must add up to the total.
L_CdcFloatArm = 16.25 in
L_CdcScaleArm := L_LeverArmTotal - L_CdcFloatArm
L_CdcScaleArm = 19.75 in
