# Monroe's reflections on this file and on our CDC design.
# The logic for picking the best size of tubing isn't quite right because it automatically excludes the first and the last elements of the available tubing arrays. I discovered this by trying to narrow the options for tubing sizes and discovered that the algorithm doesn't use all of the available sizes.
# I previously thought that we would develop a basic design for the CDC and that we would alway use 1/8" tubing. It is now clear that it is necessary to use different diameters of tubing to get a reasonable range of plant flow rates. This means that we will need to find appropriate fittings for several different sizes of tubing. We need to create designs for the different versions of CDC and ideally we should find a way to reduce the number of different systems that we manufacturer.
# We are currently constrained with the length of the doser tubing based on the distance to the floor. We could remove a section of the floor and have the tubing extend into the drain channel. However, it is necessary to almost double the length of the tubing to be able to use the next size up in tubing diameter.
# Chlorination is a challenge because the stock needs to be dilute enough so that it doesn't decay rapidly and the viscosity of the dilute solutions is close to that of water (do we have data for this?). One way to reduce the length of the tubing required is to reduce the driving head. It might be reasonable to reduce the driving head for the chlorinator to 10 cm. I have made this change. This cuts the tubing length in half as well.
# We should calculate the required L/D ratio for keeping the nonlinear error small.
# The algorithm produces a nicer sequence of number and diameter of tubing if we allow 2.5 m long tubes, and the results are different for PACl and Alum.
# Before creating a full set of doser designs we should review our design options and see which parameters we could tweak to get a nicer set of doser designs. We should also investigate likely maximum dosages for PACl and Alum.
# Linear Chemical Dose Controller
# Select the set of available tubing diameters
# [component: outputs tubediameterunitsystem]
# Select the coagulant to be used
# [component: outputs EN_Coag]
# Maximum Tube Length to Span the Walkway without Hitting the Floor
L_TubeDrape := 0.25 m  # add this length to short tubes so that they drape nicely
D_CdcTubeWeight := 4 in
H_CdcTubeLong := ZW_CdcCht - Z_Walkway - D_CdcTubeWeight/2 = 1.02759 m
H_CoagCdcTubeShort := Z_EtTop + H_DoserAssembly - Z_Walkway - HL_CoagCdc - D_CdcTubeWeight/2 = 0.827585 m
X_TubeDrape := W_PlantDC*H_CoagCdcTubeShort/(H_CdcTubeLong + H_CoagCdcTubeShort)
H_CdcTubeLong/(W_PlantDC - x) == H_CdcTubeShort/x
L_CoagCdcTubeMax := sqrt(H_CdcTubeLong^2 + (W_PlantDC - X_TubeDrape)^2) + sqrt(H_CoagCdcTubeShort^2 + X_TubeDrape^2) = 2.10752 m  # slight underestimate
L_CoagCdcTubeMin := sqrt((H_DoserAssembly + HL_CoagCdc)^2 + W_PlantDC^2) + L_TubeDrape
H_ChlorCdcTubeShort := Z_EtTop + H_DoserAssembly - Z_Walkway - HL_ChlorCdc - D_CdcTubeWeight/2 = 0.927585 m
L_ChlorCdcTubeMax := sqrt(H_CdcTubeLong^2 + (W_PlantDC - X_TubeDrape)^2) + sqrt(H_ChlorCdcTubeShort^2 + X_TubeDrape^2) = 2.19664 m
L_ChlorCdcTubeMin := sqrt((H_DoserAssembly + HL_ChlorCdc)^2 + W_PlantDC^2) + L_TubeDrape
# use the minimums later to calculate the length of "connector tubes" (larger diameter tubes connected to the design tube, adding the necessary length to reach the drop tube). We will need to create a database of reducing barb fittings to figure out the next larger diameter tube we can use, and report that in the design specs.
# Functions for Coagulant Viscosities and Selecting Available Tube Diameters
D_TubeAvailable :=
    D ← D_TubeMetric if tubediameterunitsystem
    D ← D_TubeEnglish otherwise
    return D
D_TubeEnglish = in/32
D_TubeAvailable =  # error: This variable is undefined.
Nu_Alum(C_Alum) := (1 + 4.255*10^-6*(C_Alum/(kg/m^3))^2.289)*Nu_Water
Nu_PACl(C_PACl) := (1 + 2.383*10^-5*(C_PACl/(kg/m^3))^1.893)*Nu_Water
Nu_Coag(C_Coag, EN_Coag) :=
    Nu ← Nu_Alum(C_Coag) if EN_Coag == 0
    Nu ← Nu_PACl(C_Coag) otherwise
    return Nu
# Tube Diameter Constraints for Laminar Flow and Deviation from Linear Head Loss Behavior
# Minimum diameter for which flow is still laminar at max flow rate
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D_TubeMinLaminar(Q_Max, ν) := 4*Q_Max/(π*ν*Re_PipeTransition)
# Now calculate the minimum diameter which ensures less than 10% error in flow caused by minor losses
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D_TubeMinError(Q_Max, HL_Max) := (8*Q_Max^2*K_CdcTube/((1 - Π_LinearCdcError)*HL_Max*g*π^2)*(1/Π_LinearCdcError - Π_Q))^(1/4)
# The minimum diameter is constrained by both the requirement that tube flow be laminar and that there is a maximum acceptable deviation from linear head loss behavior
D_Min(Q_Max, HL_Max, ν) := max(D_TubeMinLaminar(Q_Max, ν), D_TubeMinError(Q_Max, HL_Max))
# Now we use the forceround function to select the design tube diameter, which is the smallest of the available tube diameters which is still greater than the minimum allowable tube diameter calculated by the function defined above
D_Design(Q_Max, HL_Max, ν) := ForceRound(D_Min(Q_Max, HL_Max, ν), D_TubeAvailable, 1)
# Flow Rate Constraints for Laminar Tube Flow, Deviation from Linear Head Loss Behavior, and Lowest Possible Flow
# This is the estimated maximum flow that can be sent through the a single tube without exceeding the maximum tube length. It is based on eliminating diameter from the Hagen-Poiseuille equation by using the maximum Reynolds number constraint
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Q_MaxLaminar(L_Max, HL_Max, ν) := (L_Max*Re_PipeTransition^4*π^3*ν^5/(2*g*HL_Max))^(1/3)
# Maximum flow that can be put through a tube of a given diameter without exceeding the allowable deviation from linear head loss behavior
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Q_MaxError(D, HL_Cdc) := π*D^2*sqrt((1 - Π_LinearCdcError)*HL_Cdc*g/(8*K_CdcTube*(1/Π_LinearCdcError - Π_Q)))
# The max flow rate through a dosing tube is the minimum of the previous two constraints
Q_TubeMax(D, L_Max, HL_Max, ν) := min(Q_MaxLaminar(L_Max, HL_Max, ν), Q_MaxError(D, HL_Max))
# At very low flows the design will fail given a finite set of tube diameters and a maximum allowable length. Thus calculate the minimum design flow that can be produced based on the Hagen-Poiseuille equation.
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Q_Min(L_Max, HL_Max, D_Min, ν) := HL_Max*g*π*D_Min^4/(128*ν*L_Max)
# Define a range of feasible coagulant flow rates for plotting. Note that the minimum flow plotted is the minimum design flow (which is the maximum flow for a given design). The maximum flow is set by the constraint for laminar tube flow.
Q_CoagRange := Q_Min(L_CoagCdcTubeMax, HL_CoagCdc, D_TubeAvailable[0], Nu_Coag(C_CoagStockMax, EN_Coag)), Q_Min(L_CoagCdcTubeMax, HL_CoagCdc, D_TubeAvailable[0], Nu_Coag(C_CoagStockMax, EN_Coag)) + 1*mL/min .. Q_TubeMax(D_TubeAvailable[last(D_TubeAvailable)], L_CoagCdcTubeMax, HL_CoagCdc, Nu_Coag(C_CoagStockMax, EN_Coag))
# Length of Tubing Required Given Head Loss, Max Flow, and Diameter
# Length of tube required to get desired head loss at maximum flow based on the Hagen-Poiseuille equation.
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L_Tube(Q_Max, D, HL_Max, ν, K_Minor) := (HL_Max*g*π*vectorize(vectorize(D*D)*vectorize(D*D))/Q_Max - K_Minor*8*Q_Max/π)/(128*ν)
# The maximum tube length constraint may be violated if there aren't enough available tubing diameters.
L_MaxLine(Q) := L_CdcTubeMax
i := 0 .. last(D_TubeAvailable)
Q_CoagCdcDesired[i] := floor(10*Q_TubeMax(D_TubeAvailable[i], L_CoagCdcTubeMax, HL_CoagCdc, Nu_Coag(C_CoagStockMax, EN_Coag))/(mL/s))*mL/s/10
Q_CoagCdcDesired =  # error  # round for convenient flow values
Q_ChlorCdcDesired[i] := floor(10*Q_TubeMax(D_TubeAvailable[i], L_ChlorCdcTubeMax, HL_ChlorCdc, Nu_Water)/(mL/s))*mL/s/10
# Tube Number, Length, and Diameter/Stock Flow Rate Functions
# First three functions are for coagulant, last three are for chlorine
L_CdcTube(Q_Plant, C_DoseMax, C_StockMax, HL_Cdc, EN_Coag, K_TubeMinor, L_TubeMax) :=
    Q_ChemMin ← Q_Plant*C_DoseMax/C_StockMax
    N_TubeArray ← ArrayTrunc(ceil(Q_ChemMin/Q_CoagCdcDesired))
    Q_ChemStockArray ← vectorize(submatrix(Q_CoagCdcDesired, 0, last(N_TubeArray), 0, 0)*N_TubeArray)
    C_ChemStockArray ← C_DoseMax*Q_Plant/Q_ChemStockArray
    L_TubeArray ←
        L_Tube(submatrix(Q_CoagCdcDesired, 0, last(N_TubeArray), 0, 0), submatrix(D_TubeAvailable, 0, last(N_TubeArray), 0, 0), HL_Cdc, Nu_Coag(C_ChemStockArray, EN_Coag), K_TubeMinor) if last(N_TubeArray) ≠ 0
        [L_Tube(submatrix(Q_CoagCdcDesired, 0, last(N_TubeArray), 0, 0), submatrix(D_TubeAvailable, 0, last(N_TubeArray), 0, 0), HL_Cdc, Nu_Coag(C_ChemStockArray, EN_Coag), K_TubeMinor)] otherwise
    L_Tube ←
        min(L_TubeArray) if min(L_TubeArray) > L_TubeMax or last(L_TubeArray) == 0
        FloorNearest(L_TubeMax, L_TubeArray) otherwise
    L_Tube
# two options for L.TubeArray to ensure that it stays a matrix at all times!
D_CdcTube(Q_Plant, C_DoseMax, C_StockMax, HL_Cdc, EN_Coag, K_TubeMinor, L_TubeMax) :=
    Q_ChemMin ← Q_Plant*C_DoseMax/C_StockMax
    N_TubeArray ← ArrayTrunc(ceil(Q_ChemMin/Q_CoagCdcDesired))
    Q_ChemStockArray ← vectorize(submatrix(Q_CoagCdcDesired, 0, last(N_TubeArray), 0, 0)*N_TubeArray)
    C_ChemStockArray ← C_DoseMax*Q_Plant/Q_ChemStockArray
    L_TubeArray ←
        L_Tube(submatrix(Q_CoagCdcDesired, 0, last(N_TubeArray), 0, 0), submatrix(D_TubeAvailable, 0, last(N_TubeArray), 0, 0), HL_Cdc, Nu_Coag(C_ChemStockArray, EN_Coag), K_TubeMinor) if last(N_TubeArray) ≠ 0
        [L_Tube(submatrix(Q_CoagCdcDesired, 0, last(N_TubeArray), 0, 0), submatrix(D_TubeAvailable, 0, last(N_TubeArray), 0, 0), HL_Cdc, Nu_Coag(C_ChemStockArray, EN_Coag), K_TubeMinor)] otherwise
    L_Tube ←
        min(L_TubeArray) if min(L_TubeArray) > L_TubeMax or last(L_TubeArray) == 0
        FloorNearest(L_TubeMax, L_TubeArray) otherwise
    D_Tube ← D_TubeAvailable[index(Q_ChemStockArray[index(L_Tube, L_TubeArray)]/N_TubeArray[index(L_Tube, L_TubeArray)], Q_CoagCdcDesired)]
    D_Tube
N_CdcTubes(Q_Plant, C_DoseMax, C_StockMax, HL_Cdc, EN_Coag, K_TubeMinor, L_TubeMax) :=
    Q_ChemMin ← Q_Plant*C_DoseMax/C_StockMax
    N_TubeArray ← ArrayTrunc(ceil(Q_ChemMin/Q_CoagCdcDesired))
    Q_ChemStockArray ← vectorize(submatrix(Q_CoagCdcDesired, 0, last(N_TubeArray), 0, 0)*N_TubeArray)
    C_ChemStockArray ← C_DoseMax*Q_Plant/Q_ChemStockArray
    L_TubeArray ←
        L_Tube(submatrix(Q_CoagCdcDesired, 0, last(N_TubeArray), 0, 0), submatrix(D_TubeAvailable, 0, last(N_TubeArray), 0, 0), HL_Cdc, Nu_Coag(C_ChemStockArray, EN_Coag), K_TubeMinor) if last(N_TubeArray) ≠ 0
        [L_Tube(submatrix(Q_CoagCdcDesired, 0, last(N_TubeArray), 0, 0), submatrix(D_TubeAvailable, 0, last(N_TubeArray), 0, 0), HL_Cdc, Nu_Coag(C_ChemStockArray, EN_Coag), K_TubeMinor)] otherwise
    L_Tube ←
        min(L_TubeArray) if min(L_TubeArray) > L_TubeMax or last(L_TubeArray) == 0
        FloorNearest(L_TubeMax, L_TubeArray) otherwise
    N_Tubes ← N_TubeArray[index(L_Tube, L_TubeArray)]
    N_Tubes
Q_CdcStock(Q_Plant, C_DoseMax, C_StockMax, HL_Cdc, EN_Coag, K_TubeMinor, L_TubeMax) :=
    Q_ChemMin ← Q_Plant*C_DoseMax/C_StockMax
    N_TubeArray ← ArrayTrunc(ceil(Q_ChemMin/Q_ChlorCdcDesired))
    Q_ChemStockArray ← vectorize(submatrix(Q_ChlorCdcDesired, 0, last(N_TubeArray), 0, 0)*N_TubeArray)
    C_ChemStockArray ← C_DoseMax*Q_Plant/Q_ChemStockArray
    L_TubeArray ←
        L_Tube(submatrix(Q_ChlorCdcDesired, 0, last(N_TubeArray), 0, 0), submatrix(D_TubeAvailable, 0, last(N_TubeArray), 0, 0), HL_Cdc, Nu_Coag(C_ChemStockArray, EN_Coag), K_TubeMinor) if last(N_TubeArray) ≠ 0
        [L_Tube(submatrix(Q_ChlorCdcDesired, 0, last(N_TubeArray), 0, 0), submatrix(D_TubeAvailable, 0, last(N_TubeArray), 0, 0), HL_Cdc, Nu_Coag(C_ChemStockArray, EN_Coag), K_TubeMinor)] otherwise
    L_Tube ←
        min(L_TubeArray) if min(L_TubeArray) > L_TubeMax or last(L_TubeArray) == 0
        FloorNearest(L_TubeMax, L_TubeArray) otherwise
    Q_Stock ← Q_ChemStockArray[index(L_Tube, L_TubeArray)]
    Q_Stock
L_CdcTubeChem(Q_Plant, C_DoseMax, C_StockMax, HL_Cdc, Nu, K_TubeMinor, L_TubeMax) :=
    Q_ChemMin ← Q_Plant*C_DoseMax/C_StockMax
    N_TubeArray ← ArrayTrunc(ceil(Q_ChemMin/Q_ChlorCdcDesired))
    Q_ChemStockArray ← vectorize(submatrix(Q_ChlorCdcDesired, 0, last(N_TubeArray), 0, 0)*N_TubeArray)
    L_TubeArray ←
        L_Tube(submatrix(Q_ChlorCdcDesired, 0, last(N_TubeArray), 0, 0), submatrix(D_TubeAvailable, 0, last(N_TubeArray), 0, 0), HL_Cdc, Nu_Coag(C_ChemStockArray, EN_Coag), K_TubeMinor) if last(N_TubeArray) ≠ 0
        [L_Tube(submatrix(Q_ChlorCdcDesired, 0, last(N_TubeArray), 0, 0), submatrix(D_TubeAvailable, 0, last(N_TubeArray), 0, 0), HL_Cdc, Nu_Coag(C_ChemStockArray, EN_Coag), K_TubeMinor)] otherwise
    L_Tube ←
        min(L_TubeArray) if min(L_TubeArray) > L_TubeMax or last(L_TubeArray) == 0
        FloorNearest(L_TubeMax, L_TubeArray) otherwise
    L_Tube
D_CdcTubeChem(Q_Plant, C_DoseMax, C_StockMax, HL_Cdc, Nu, K_TubeMinor, L_TubeMax) :=
    Q_ChemMin ← Q_Plant*C_DoseMax/C_StockMax
    N_TubeArray ← ArrayTrunc(ceil(Q_ChemMin/Q_ChlorCdcDesired))
    Q_ChemStockArray ← vectorize(submatrix(Q_ChlorCdcDesired, 0, last(N_TubeArray), 0, 0)*N_TubeArray)
    L_TubeArray ←
        L_Tube(submatrix(Q_ChlorCdcDesired, 0, last(N_TubeArray), 0, 0), submatrix(D_TubeAvailable, 0, last(N_TubeArray), 0, 0), HL_Cdc, Nu_Coag(C_ChemStockArray, EN_Coag), K_TubeMinor) if last(N_TubeArray) ≠ 0
        [L_Tube(submatrix(Q_ChlorCdcDesired, 0, last(N_TubeArray), 0, 0), submatrix(D_TubeAvailable, 0, last(N_TubeArray), 0, 0), HL_Cdc, Nu_Coag(C_ChemStockArray, EN_Coag), K_TubeMinor)] otherwise
    L_Tube ←
        min(L_TubeArray) if min(L_TubeArray) > L_TubeMax or last(L_TubeArray) == 0
        FloorNearest(L_TubeMax, L_TubeArray) otherwise
    D_Tube ← D_TubeAvailable[index(Q_ChemStockArray[index(L_Tube, L_TubeArray)]/N_TubeArray[index(L_Tube, L_TubeArray)], Q_ChlorCdcDesired)]
    D_Tube
N_CdcTubesChem(Q_Plant, C_DoseMax, C_StockMax, HL_Cdc, Nu, K_TubeMinor, L_TubeMax) :=
    Q_ChemMin ← Q_Plant*C_DoseMax/C_StockMax
    N_TubeArray ← ArrayTrunc(ceil(Q_ChemMin/Q_ChlorCdcDesired))
    Q_ChemStockArray ← vectorize(submatrix(Q_ChlorCdcDesired, 0, last(N_TubeArray), 0, 0)*N_TubeArray)
    L_TubeArray ← L_Tube(submatrix(Q_ChlorCdcDesired, 0, last(N_TubeArray), 0, 0), submatrix(D_TubeAvailable, 0, last(N_TubeArray), 0, 0), HL_Cdc, Nu, K_TubeMinor)
    L_Tube ←
        min(L_TubeArray) if min(L_TubeArray) > L_TubeMax or last(L_TubeArray) == 0
        FloorNearest(L_TubeMax, L_TubeArray) otherwise
    N_Tubes ← N_TubeArray[index(L_Tube, L_TubeArray)]
    N_Tubes
Q_CdcStockChem(Q_Plant, C_DoseMax, C_StockMax, HL_Cdc, Nu, K_TubeMinor, L_TubeMax) :=
    Q_ChemMin ← Q_Plant*C_DoseMax/C_StockMax
    N_TubeArray ← ArrayTrunc(ceil(Q_ChemMin/Q_ChlorCdcDesired))
    Q_ChemStockArray ← vectorize(submatrix(Q_ChlorCdcDesired, 0, last(N_TubeArray), 0, 0)*N_TubeArray)
    L_TubeArray ← L_Tube(submatrix(Q_ChlorCdcDesired, 0, last(N_TubeArray), 0, 0), submatrix(D_TubeAvailable, 0, last(N_TubeArray), 0, 0), HL_Cdc, Nu, K_TubeMinor)
    L_Tube ←
        min(L_TubeArray) if min(L_TubeArray) > L_TubeMax or last(L_TubeArray) == 0
        FloorNearest(L_TubeMax, L_TubeArray) otherwise
    Q_Stock ← Q_ChemStockArray[index(L_Tube, L_TubeArray)]
    Q_Stock
# Main Coagulant Small-Diameter Tube Design
L_CoagCdcTube := L_CdcTube(Q_Plant, C_CoagDoseMax, C_CoagStockMax, HL_CoagCdc, EN_Coag, K_CdcTube, L_CoagCdcTubeMax) = 1.59529 m
Q_CoagStock := Q_CdcStock(Q_Plant, C_CoagDoseMax, C_CoagStockMax, HL_CoagCdc, EN_Coag, K_CdcTube, L_CoagCdcTubeMax) = 5e-6 m^3/s
D_CdcCoag := D_CdcTube(Q_Plant, C_CoagDoseMax, C_CoagStockMax, HL_CoagCdc, EN_Coag, K_CdcTube, L_CoagCdcTubeMax) = 0.0047625 m
D_CdcCoag = in/16
N_CoagCdcTubes := N_CdcTubes(Q_Plant, C_CoagDoseMax, C_CoagStockMax, HL_CoagCdc, EN_Coag, K_CdcTube, L_CoagCdcTubeMax) = 1
C_CoagDoseMax =  # error
C_CoagStock := C_CoagDoseMax*Q_Plant/Q_CoagStock = 384 kg/m^3
Q_PlantGraph := 1*L/s, 1.05*L/s .. 50*L/s
EN_CoagGraph := 0
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# Chlorine Small-Diameter Tube Design
Q_ChlorMin := Q_Plant*C_ChlorineDoseMax/C_ChlorineStockMax = 1.28 mL/s
L_ChlorCdcTube := L_CdcTubeChem(Q_Plant, C_ChlorineDoseMax, C_ChlorineStockMax, HL_ChlorCdc, Nu_Water, K_CdcTube, L_CoagCdcTubeMax)
Q_ChlorStock := Q_CdcStockChem(Q_Plant, C_ChlorineDoseMax, C_ChlorineStockMax, HL_ChlorCdc, Nu_Water, K_CdcTube, L_CoagCdcTubeMax) = 1.6e-6 m^3/s
D_CdcChlor := D_CdcTubeChem(Q_Plant, C_ChlorineDoseMax, C_ChlorineStockMax, HL_ChlorCdc, Nu_Water, K_CdcTube, L_CoagCdcTubeMax) = in/32
N_ChlorCdcTubes := N_CdcTubes(Q_Plant, C_ChlorineDoseMax, C_ChlorineStockMax, HL_ChlorCdc, Nu_Water, K_CdcTube, L_CoagCdcTubeMax) = 1
C_ChlorStock := C_ChlorineDoseMax*Q_Plant/Q_ChlorStock = 40 kg/m^3
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# Filter Coagulant Small-Diameter Tube Design
# This will be deleted as soon as the drawing code is updated. Deleting it now will cause a lot of the drawing to fail!!!
Q_FiCoagMin := Q_Plant*C_FilterCoagDoseMax/C_FilterCoagStockMax = 1.2 mL/s
N_FiCoagCdcTubeArray := ArrayTrunc(ceil(Q_FiCoagMin/Q_CoagCdcDesired)) = [3; 1]
Q_FiCoagStockArray := vectorize(submatrix(Q_CoagCdcDesired, 0, last(N_FiCoagCdcTubeArray), 0, 0)*N_FiCoagCdcTubeArray) = [1.5e-6; 1.3e-6] m^3/s
C_FiCoagStockArray := C_FilterCoagDoseMax*Q_Plant/Q_FiCoagStockArray = [12.8; 14.7692] kg/m^3
L_FilterCoagCdcTubeArray := L_Tube(submatrix(Q_CoagCdcDesired, 0, last(N_FiCoagCdcTubeArray), 0, 0), submatrix(D_TubeAvailable, 0, last(N_FiCoagCdcTubeArray), 0, 0), HL_CoagCdc, Nu_Coag(C_FiCoagStockArray, EN_Coag), K_CdcTube) = [0.569988; 1.08293] m
L_FiCoagCdcTube :=
    min(L_FilterCoagCdcTubeArray) if min(L_FilterCoagCdcTubeArray) == L_FilterCoagCdcTubeArray or min(L_FilterCoagCdcTubeArray) > L_CoagCdcTubeMax or last(L_FilterCoagCdcTubeArray) == 0
    FloorNearest(L_CoagCdcTubeMax, L_FilterCoagCdcTubeArray) otherwise
    = 1.08293 m
D_CdcFiCoag :=
    D_TubeAvailable[index(Q_FiCoagStockArray/N_FiCoagCdcTubeArray, Q_CoagCdcDesired)] if min(L_FilterCoagCdcTubeArray) == L_FilterCoagCdcTubeArray
    D_TubeAvailable[index(Q_FiCoagStockArray[index(L_FiCoagCdcTube, L_FilterCoagCdcTubeArray)]/N_FiCoagCdcTubeArray[index(L_FiCoagCdcTube, L_FilterCoagCdcTubeArray)], Q_CoagCdcDesired)] otherwise
    = 0.00238125 m
D_CdcFiCoag =  # error
N_FiCoagCdcTubes :=
    min(N_FiCoagCdcTubeArray) if min(L_FilterCoagCdcTubeArray) == L_FilterCoagCdcTubeArray
    N_FiCoagCdcTubeArray[index(L_FiCoagCdcTube, L_FilterCoagCdcTubeArray)] otherwise
    = 1
C_FiCoagStock :=
    min(C_FiCoagStockArray) if min(L_FilterCoagCdcTubeArray) == L_FilterCoagCdcTubeArray
    C_FiCoagStockArray[index(L_FiCoagCdcTube, L_FilterCoagCdcTubeArray)] otherwise
    = 14.7692 kg/m^3
Q_FiCoagStock :=
    min(Q_FiCoagStockArray) if min(L_FilterCoagCdcTubeArray) == L_FilterCoagCdcTubeArray
    Q_FiCoagStockArray[index(L_FiCoagCdcTube, L_FilterCoagCdcTubeArray)] otherwise
    = 1.3e-6 m^3/s
# Need the following...
# Select connectors/adaptors required.
# Main Coagulant CHT Float Valve Design
D_CoagFloatValveOrifice :=
    i ← 0
    while h_orifice(D_FltVlvOrificesAvail[i], Pi_VenaContractaOrifice, Q_CoagStock) ≥ H_CoagTankAboveHeadTank
        i ← i + 1
    return D_FltVlvOrificesAvail[i]
D_CoagFloatValveOrifice =  # error
HL_CoagFloatValveOrifice := h_orifice(D_CoagFloatValveOrifice, Pi_VenaContractaOrifice, Q_CoagStock) = 17.2647 cm
L_TubeStockToCHEst := 1 m
HL_CoagTubeStockToCHMax := H_CoagTankAboveHeadTank - HL_CoagFloatValveOrifice = 12.7353 cm
D_CoagTubeStockToCHEst := (128*Nu_Water*L_TubeStockToCHEst*Q_CoagStock/(π*g*HL_CoagTubeStockToCHMax))^(1/4) = 0.140699 in
D_CoagTubeStockToCH := max(3/8*in, D_CoagTubeStockToCHEst) = 0.375 in
# Use 3/8" tubing to connect the stock tank/calibration column to the constant head tank unless a larger tube is needed (which it probably never will be).
# Chlorine CHT Float Valve Design
D_ChlorFloatValveOrifice :=
    i ← 0
    while h_orifice(D_FltVlvOrificesAvail[i], Pi_VenaContractaOrifice, Q_ChlorStock) ≥ H_CoagTankAboveHeadTank
        i ← i + 1
    return D_FltVlvOrificesAvail[i]
D_ChlorFloatValveOrifice =  # error
HL_ChlorFloatValveOrifice := h_orifice(D_ChlorFloatValveOrifice, Pi_VenaContractaOrifice, Q_ChlorStock) = 1.76791 cm
HL_ChlorTubeStockToCHMax := H_CoagTankAboveHeadTank - HL_ChlorFloatValveOrifice = 28.2321 cm
D_ChlorTubeStockToCHEst := (128*Nu_Water*L_TubeStockToCHEst*Q_ChlorStock/(π*g*HL_ChlorTubeStockToCHMax))^(1/4) = 0.0867252 in
D_ChlorTubeStockToCH := max(3/8*in, D_ChlorTubeStockToCHEst) = 0.375 in
# Use 3/8" tubing to connect the stock tank/calibration column to the constant head tank unless a larger tube is needed (which it probably never will be).
# Filter Coagulant CHT Float Valve Design
D_FilterCoagFloatValveOrifice :=
    i ← 0
    while h_orifice(D_FltVlvOrificesAvail[i], Pi_VenaContractaOrifice, Q_FiCoagStock) ≥ H_CoagTankAboveHeadTank
        i ← i + 1
    return D_FltVlvOrificesAvail[i]
D_FilterCoagFloatValveOrifice =  # error
HL_FilterCoagFloatValveOrifice := h_orifice(D_FilterCoagFloatValveOrifice, Pi_VenaContractaOrifice, Q_FiCoagStock) = 1.1671 cm
HL_FilterCoagTubeStockToCHMax := H_CoagTankAboveHeadTank - HL_FilterCoagFloatValveOrifice = 28.8329 cm
D_FilterCoagTubeStockToCHEst := (128*Nu_Water*L_TubeStockToCHEst*Q_FiCoagStock/(π*g*HL_FilterCoagTubeStockToCHMax))^(1/4) = 0.0819058 in
D_FilterCoagTubeStockToCH := max(3/8*in, D_CoagTubeStockToCHEst) = 0.375 in
# Use 3/8" tubing to connect the stock tank/calibration column to the constant head tank unless a larger tube is needed (which it probably never will be).
# Lever Arm Scale
L_LeverArmTotal := 36 in
L_SliderEffective := 3.5 in  # Distance between the end of the slider and the pivot point of the freefall PVC tube.
L_LeverArmEffective := L_LeverArmTotal - L_SliderEffective
L_CdcFloatArm := L_LeverArmEffective/(1 + HL_CoagCdc/HL_Flowmeasure)
# To find the length of the side of the arm with the scale and the side of the arm with the float attached, solve two equations for two unknowns. One equation is similar triangles at maximum flow. The other is that the two sides of the bar must add up to the total.
L_CdcFloatArm =  # error
L_CdcScaleArm := L_LeverArmTotal - L_CdcFloatArm
L_CdcScaleArm =  # error
