# [reference: BasicInputs.xmcd]
# [reference: ExpertInputs.xmcd]
Q_Plant := 1*L/s
# [reference: MathFunctions.xmcd]
# [reference: PipeDatabase.xmcd]
# [reference: FluidsFunctions.xmcd]
## Chemical Dose Controller Dosing Tube Design
# Select the set of available tubing diameters
D_metric := [2; 3; 4; 5; 6; 7]*mm
D_english := [0.0625; 0.125; 0.17; 0.25]*in
# [component: outputs tubediameterunitsystem]
Π_Q := 0  # minimum flow rate at which the error requirement must be met. Note that setting this to zero doesn't make a big difference.
# [component: outputs EN_Coag]
Π_Error := 10 %  # maximum error allowed between linear and actual assuming calibration at the maximum flow rate
K_CdcMinor := 4  # Assumed total minor losses for the dosing system. This is scaled with the average velocity in the small diameter dosing tube.
HL_Cdc = 0.2 m  # Difference between the min and max water levels in the entrance tank. Maximum head loss through the LFOM.
L_CdcTubeMax := 1 m  # The maximum length of tubing that we are willing to use. This should be twice the distance to the floor.
D_available :=
    D ← D_metric if tubediameterunitsystem
    D ← D_english otherwise
    return D
D_available = [0.0015875; 0.003175; 0.004318; 0.00635] m
Nu_Alum(C_Alum) := (1 + 4.255*10^-6*(C_Alum/(kg/m^3))^2.289)*Nu_Water
Nu_PACl(C_PACl) := (1 + 2.383*10^-5*(C_PACl/(kg/m^3))^1.893)*Nu_Water
Nu_Coag(C_Coag, EN_Coag) :=
    Nu ← Nu_Alum(C_Coag) if EN_Coag == 0
    Nu ← Nu_PACl(C_Coag) otherwise
    return Nu
Nu_Coag(C_CoagStockMax, EN_Coag) = 4.84605e-6 m^2/s
Re_max := 2100
# This is the maximum flow that can be sent through the alum feeder without requiring extremely long tubes is based on eliminating diameter from the Hagen-Poiseuille equation by using the maximum Reynolds number constraint. For higher flows multiple parallel tubes could be used. However the maximum flow rate that can be handled by the float valve needs to be considered.
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Q_maxlaminar(L_max, h_lmax, ν) := (L_max*Re_max^4*π^3*ν^5/(2*g*h_lmax))^(1/3)
# Minimum diameter required to get laminar flow at max flow based on Reynolds number for transition to turbulence
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D_minlaminar(Q_max, ν) := 4*Q_max/(π*ν*Re_max)
# Now we can calculate the diameter of tubing required to accomodate the largest flow that a flow control module can deliver withohut requiring an excessively long tube
# Length of tube required to get desired head loss at maximum flow based on the Hagen-Poiseuille equation.
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L_tube(Q_max, D, h_lmax, ν, K_Minor) := (h_lmax*(g*π*vectorize(vectorize(D*D)*vectorize(D*D)))/Q_max - K_Minor*8*Q_max/π)/(128*ν)
# Now calculate the minimum diameter to ensure less than 10% error in flow caused by minor losses
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D_MinKError(Q_Max, h_lMax) := (8*Q_Max^2*K_CdcMinor/((1 - Π_Error)*h_lMax*g*π^2)*(1/Π_Error - Π_Q))^(1/4)
D_MinKError(2*mL/s, HL_Cdc) = 2.92772 mm
# The minimum diameter is the maximum of the diameter calculated by the previous two equations.
D_min(Q_max, h_lmax, ν) := max(D_minlaminar(Q_max, ν), D_MinKError(Q_max, h_lmax))
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Q_MinError(D) := π*D^2*sqrt((1 - Π_Error)*HL_Cdc*g*Π_Error/(8*K_CdcMinor))
Q_MinError(D_available) = [0.588029; 2.35212; 4.35048; 9.40847] mL/s
# Define a range of flows that we will use to plot the results.
Q_range := 10*mL/min, 10.2*mL/min .. Q_MinError(D_available[last(D_available)])
## Tube diameter constraints
# Now let's add the constraint of given tube diameters. First we write a function that will round up to the up to the next available tube size.
forceround(x, xarray, direction) :=
    xarray ← sort(xarray)
    i ← 0
    while x > xarray[i]
        i ← i + 1
    return xarray[i - 1 + direction]  # direction is for rounding up (1) or rounding down (0).
# Now we use the forceround function to find the design tube diameter based on the minimum tube diameter and the available tube diameters.
D_design(Q_max, h_lmax, ν) := forceround(D_min(Q_max, h_lmax, ν), D_available, 1)
# At very low flows the design will fail given a finite set of tube diameters. Thus calculate the minimum design flow that can be produced based on the Hagen-Poiseuille equation.
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Q_min(L_max, h_lmax, D_min, ν) := h_lmax*g*π*D_min^4/(128*ν*L_max)
# Redefine the flow rate to only include the feasible range given the constraints. Note that the minimum flow plotted is the minimum design flow. The design flow is the maximum flow for a flow control module.
Q_range := Q_min(L_CdcTubeMax, HL_Cdc, D_available[0], Nu_Coag(C_CoagDoseMax, EN_Coag)), Q_min(L_CdcTubeMax, HL_Cdc, D_available[0], Nu_Coag(C_CoagDoseMax, EN_Coag)) + 1*mL/min .. Q_maxlaminar(L_CdcTubeMax, HL_Cdc, Nu_Coag(C_CoagDoseMax, EN_Coag))
# The maximum tube length constraint may be violated if there aren't enough available tubing diameters.
L_maxLine(Q) := L_CdcTubeMax
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Q_KError(D) := sqrt((1 - Π_Error)*HL_Cdc*g*π^2*D^4/(8*K_CdcMinor*(1/Π_Error - Π_Q)))
D_available = [1; 2; 2.72; 4] in/16
Q_KError(D_available) = [0.588029; 2.35212; 4.35048; 9.40847] mL/s
Q_CdcDesired := floor(2*Q_KError(D_available)/(mL/s))*mL/s/2 = [5e-7; 2e-6; 4e-6; 9e-6] m^3/s
Q_CdcDesired = [0.5; 2; 4; 9] mL/s
D_design(Q_max, 20 cm, Nu_Alum(C_Alum))
L_tube(Q_CdcDesired, D_available, 20 cm, Nu_Coag(C_CoagStockMax, EN_Coag), K_CdcMinor) = [0.117969; 0.471874; 0.797639; 1.64676] m
D_CdcCoag := LookupFloor(L_CdcTubeMax, L_tube(Q_CdcDesired, D_available, 20 cm, Nu_Coag(C_CoagStockMax, EN_Coag), K_CdcMinor), D_available) = 2.72 in/16
Q_CoagTubeMax := LookupRound(D_CdcCoag, D_available, Q_CdcDesired) = 4e-6 m^3/s
# Coagulant Dose Design
Q_CoagMin := Q_Plant*C_CoagDoseMax/C_CoagStockMax = 0.15 mL/s
N_CoagCdcTubes := ceil(Q_CoagMin/Q_CdcDesired) = [1; 1; 1; 1]
Q_CoagStockActual := vectorize(Q_CdcDesired*N_CoagCdcTubes) = [0.5; 2; 4; 9] mL/s
Q_CoagStockActual/N_CoagCdcTubes = [0.5; 2; 4; 9] mL/s
C_CoagStockActual := C_CoagDoseMax*Q_Plant/Q_CoagStockActual = [120; 30; 15; 6.66667] kg/m^3
i := 0 .. 3
L_CoagCdcTube := L_tube(Q_CdcDesired, D_available, HL_Cdc, Nu_Coag(C_CoagStockActual, EN_Coag), K_CdcMinor) = [0.459394; 2.26356; 3.85732; 7.97766] m
# Chlorine Dose Design
Q_ChlorMin := Q_Plant*C_ChlorineDoseMax/C_ChlorineStockMax = 0.04 mL/s
N_ChlorCdcTubes := ceil(Q_ChlorMin/Q_CdcTubeMax)
Q_ChlorStockActual := Q_CdcTubeMax*N_ChlorCdcTubes
C_ChlorStockActual := C_ChlorineDoseMax*Q_Plant/Q_ChlorStockActual
L_ChlorCdcTube := L_tube(Q_ChlorStockActual/N_ChlorCdcTubes, D_Actual, HL_Cdc, Nu_Coag(C_ChlorStockActual, EN_Coag), K_CdcMinor)
# Fi Coag Dose Design
Q_FiCoagMin := Q_Plant*C_FilterCoagDoseMax/C_FilterCoagStockMax = 0.0375 mL/s
N_FilterCoagCdcTubes := ceil(Q_FiCoagMin/Q_CdcTubeMax)
Q_FiCoagStockActual := Q_CdcTubeMax*N_FilterCoagCdcTubes
C_FiCoagStockActual := C_FilterCoagDoseMax*Q_Plant/Q_FiCoagStockActual
L_FilterCoagCdcTube := L_tube(Q_FiCoagStockActual/N_FilterCoagCdcTubes, D_Actual, HL_Cdc, Nu_Coag(C_FiCoagStockActual, EN_Coag), K_CdcMinor)
# Need the following...
# select correct Kerick valve based on coag flow and allowable head loss between stock tank and constant head tank
# Select flexible tubing size between stock tank and CHT.
# Select connectors/adaptors required.
D_FltVlvOrificesAvail := [0.093 in; 0.187 in; 0.25 in; 0.312 in]
# Coagulant Valve
D_CoagFloatValveOrifice :=
    i ← 0
    while h_orifice(D_FltVlvOrificesAvail[i], Pi_VenaContractaOrifice, Q_CoagStockActual) ≥ H_CoagTankAboveHeadTank
        i ← i + 1
    return D_FltVlvOrificesAvail[i]  # error: This value must be a scalar.
D_CoagFloatValveOrifice =  # error: This variable is undefined.
HL_CoagFloatValveOrifice := h_orifice(D_CoagFloatValveOrifice, Pi_VenaContractaOrifice, Q_CoagStockActual)
L_TubeStockToCHEst := 1 m
HL_CoagTubeStockToCHMax := H_CoagTankAboveHeadTank - HL_CoagFloatValveOrifice
D_CoagTubeStockToCHEst := (128*Nu_Water*L_TubeStockToCHEst*Q_CoagStockActual/(π*g*HL_CoagTubeStockToCHMax))^(1/4)
D_CoagTubeStockToCH := max(3/8*in, D_CoagTubeStockToCHEst)
# Use 3/8" tubing to connect the stock tank/calibration column to the constant head tank unless a larger tube is needed (which it probably never will be).
# Chlorine Valve
D_ChlorFloatValveOrifice :=
    i ← 0
    while h_orifice(D_FltVlvOrificesAvail[i], Pi_VenaContractaOrifice, Q_ChlorStockActual) ≥ H_CoagTankAboveHeadTank
        i ← i + 1
    return D_FltVlvOrificesAvail[i]
D_ChlorFloatValveOrifice =  # error
HL_ChlorFloatValveOrifice := h_orifice(D_ChlorFloatValveOrifice, Pi_VenaContractaOrifice, Q_ChlorStockActual)
HL_ChlorTubeStockToCHMax := H_CoagTankAboveHeadTank - HL_ChlorFloatValveOrifice
D_ChlorTubeStockToCHEst := (128*Nu_Water*L_TubeStockToCHEst*Q_ChlorStockActual/(π*g*HL_ChlorTubeStockToCHMax))^(1/4)
D_ChlorTubeStockToCH := max(3/8*in, D_ChlorTubeStockToCHEst)
# Filter Coag Valve
D_FilterCoagFloatValveOrifice :=
    i ← 0
    while h_orifice(D_FltVlvOrificesAvail[i], Pi_VenaContractaOrifice, Q_FiCoagStockActual) ≥ H_CoagTankAboveHeadTank
        i ← i + 1
    return D_FltVlvOrificesAvail[i]
D_FilterCoagFloatValveOrifice =  # error
HL_FilterCoagFloatValveOrifice := h_orifice(D_FilterCoagFloatValveOrifice, Pi_VenaContractaOrifice, Q_FiCoagStockActual)
HL_FilterCoagTubeStockToCHMax := H_CoagTankAboveHeadTank - HL_FilterCoagFloatValveOrifice
D_FilterCoagTubeStockToCHEst := (128*Nu_Water*L_TubeStockToCHEst*Q_FiCoagStockActual/(π*g*HL_FilterCoagTubeStockToCHMax))^(1/4)
D_FilterCoagTubeStockToCH := max(3/8*in, D_CoagTubeStockToCHEst)
# Use 3/8" tubing to connect the stock tank/calibration column to the constant head tank unless a larger tube is needed (which it probably never will be).
# Lever Arm Scale
L_LeverArmTotal := 36 in  # Set to be this length.
L_SliderEffective := 3.5 in  # Distance between the end of the slider and the pivot point of the freefall PVC tube.
L_LeverArmEffective := L_LeverArmTotal - L_SliderEffective
H_Max := 20 cm  # The maximum elevation the doser tube will drop when the slider is at the end of the bar at max plant flow.
# To find the length of the side of the arm with the scale and the side of the arm with the float attached, solve two equations for two unknowns. One equation is similar triangles at maximum flow. The other is that the two sides of the bar must add up to the total.
L_ScaleArmEffective := L_LeverArmEffective/(1 + HL_Cdc/H_Max)
1.75*2.54 = 4.445
L_CdcScaleArm := L_ScaleArmEffective + L_SliderEffective
L_CdcScaleArm = 0.50165 m
L_CdcFloatArm := L_LeverArmTotal - L_CdcScaleArm
L_CdcFloatArm = 0.41275 m
Angle_LeverArmMax := asin(HL_Cdc/L_CdcFloatArm) = 28.9833 deg  # Not necessarily important.
# This is the elevation difference between the point where the freefall PVC assembly is hung and the point where the end of the tube rests. The horizontal PVC has an outer radius of .525" and the tool hangar likely adds another .5".
#
# This is only significant in zeroing the CHT. It shouldn't effect the lever arm scale because it's a constant.
H_PVCAssembly := 1 in
