Q_Plant := 1*L/s
# [reference: ExpertInputs.xmcd]
# [reference: Flocculator.xmcd]
# I need this for two of the function calls.
H_Floc := 1.7 m
# This needs to be coordinated with the sed tank design. Hopefully this will be less than 2 m for this tiny plants. Need a tight sed tank design!
Π_HS := 5  # Assume this is 5 or less to keep flocculator efficiency high.
W_FlocTank := W_HumanMin
# This is the dimensions of a square channel with an expansion ever 5 times the width of the channel
fS_Floc(Q_Plant) := (K_FlocBaffle*Q_Plant^3/(Π_HS*ED_Floc))^(1/7)
Q_Graph := 0.1*L/s, 0.2*L/s .. 10*L/s
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N_FlocBafflesPerChannel(Q_Plant) := Round(W_FlocTank/fS_Floc(Q_Plant), 2) - 1
N_FlocBafflesPerChannel(Q_Plant) = 5
S_Floc(Q_Plant) := W_FlocTank/(N_FlocBafflesPerChannel(Q_Plant) + 1)
# This is the spacing between plastic inserts between the ferrocement baffles
S_Floc(Q_Plant) = 9 cm
N_FlocObstacles(Q_Plant) := ceil(H_Floc/(S_Floc(Q_Plant)*Π_HS)) - 1  # Number of Obstacles
N_FlocObstacles(Q_Plant) = 3
W_Floc(Q_Plant) := Q_Plant/S_Floc(Q_Plant)*(K_FlocBaffle/(H_Floc/(N_FlocObstacles(Q_Plant) + 1)*ED_Floc))^(1/3)  # H is really the distance between obstacles.
W_Floc(Q_Plant) = 9.15963 cm  # This is the spacing between the ferrocement baffles
# We need to provide obstacles to create more energy dissipation in the vertical path between baffles because otherwise teh H/S ratio is too large. We can do this by connecting the plastic baffles with 1/2" PVC pipe and stringing larger diameter PVC pipe over the 1/2" PVC pipe as spacers and obstacles.
CP_FlocObstacle(Q_Plant) := ψ_P(H_Floc/(1 + N_FlocObstacles(Q_Plant)), S_Floc(Q_Plant))
CP_FlocObstacle(Q_Plant) = 0.571325 m^(2/3)
CP_FlocBaffle(Q_Plant) := CP_FlocObstacle(Q_Plant)*(1 + N_FlocObstacles(Q_Plant))
CP_FlocBaffle(Q_Plant) = 2.2853 m^(2/3)
CP_FlocChannel(Q_Plant) := (1 + N_FlocBafflesPerChannel(Q_Plant))*CP_FlocBaffle(Q_Plant)
CP_FlocChannel(Q_Plant) = 13.7118 m^(2/3)
N_FlocChannels(Q_Plant) := Ceil(CP_Floc/CP_FlocChannel(Q_Plant) - 1, 2) + 1  # odd number of channels so that the last channel ends entering the sed tank.
N_FlocChannels(Q_Plant) = 7
Vol_Floc(Q_Plant) := H_Floc*W_FlocTank*N_FlocChannels(Q_Plant)*W_Floc(Q_Plant)
Vol_Floc(Q_Plant) = 588.598 L
W_FlocTank = 0.54 m
N_FlocChannels(Q_Plant)*W_Floc(Q_Plant) = 0.641174 m  # This is the length of the floc tank (not including the dimensions of the channel walls)
θ_Floc(Q_Plant) := Vol_Floc(Q_Plant)/Q_Plant
θ_Floc(Q_Plant) = 588.598 s
h_eFloc(Q_Plant) := N_FlocChannels(Q_Plant)*(1 + N_FlocBafflesPerChannel(Q_Plant))*(1 + N_FlocObstacles(Q_Plant))*K_FlocBaffle*(Q_Plant/(S_Floc(Q_Plant)*W_Floc(Q_Plant)))^2/(2*g)
h_eFloc(Q_Plant) = 0.315107 m
ED_Floc := g*h_eFloc(Q_Plant)/(Vol_Floc(Q_Plant)/Q_Plant) = 5.25 mW/kg
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