# AguaClara Water Treatment Plants
# Automated Design
# Add variable descriptions next to every varible so it is easy to interpret what this all means.
# Design References
# [reference: BasicInputs- hmr6.xmcd]
# Use BasicClientInputs and ExpertClientInputs when this is run by LabVIEW.
# Use BasicInputs and ExpertInputs to use the program in MathCAD
# Change the reference by
# - right clicking
# - select properties
# - reference tab
# - type in the correct file name
# [reference: ExpertInputs.xmcd]
B_SedPlateFramePipes = 0.3 m
# [reference: DesignAssumptions.xmcd]
# [reference: MathFunctions.xmcd]
# [reference: PipeDatabase.xmcd]
Q_Plant = 0.01 m^3/s
# [reference: MinorLossCoefficients.xmcd]
# [reference: FluidsFunctions.xmcd]
# [reference: Sedimentation Tank - hmr6 rb563.xmcd]
# [reference: Floc Hopper - New Design.xmcd]
# [reference: FCM.xmcd]
# [reference: Flocculator 3.xmcd]
# [reference: RapidMixer.xmcd]
# [reference: EntranceTankDim.xmcd]
# [reference: Materials List.xmcd]
N_SedTanks = 2
W_ExitChannelMin = 0.254 m
W_SedBay = 1 m
N_SedBays = 2
# Sed Tanks and Slopes:
Geom_ExitChannel = 0
B_SedPort =  # error: This variable is undefined.  # Height of the narrowest part of the manifold ports
N_SedTanks = 2
W_SedPort =  # error
H_SedBetween = 0 cm  # Distance from the top of the inlet manifold to the bottom of the ledge supporting the lamella frame
A_SedPort =  # error  # Port Area
L_Sed = 3.08571 m
W_SedSludgeFlat = 5 cm  # Distance between tips of manifold plates (space alloted for the drain holes
N_SedBays = 2  # Number of bays of inlet manifolds in each sed tank
AN_SedTopInlet = 60 deg  # Angle of the top of the inlet manifold
L_SedPort =  # error  # Length of the port through which water exits the inlet manifold
AN_SedBottom = 10 deg  # Angle of the bottom of inlet manifold
W_SedSlopePlate =  # error  # Width of ferrous cement plates in whice one manifold port is cut
Q_SedBay = 2.5 L/s
W_SedBayActual = 0.925 m
L_SedSlopeManifold =  # error  # This is the extra distance between the last slope and the wall
# Sedimentation Tank Sludge Drain:
N_SedSludgeOrifices = 30  # per cell
Ti_SludgeDrain = 10 min  # Tank Drain time
W_SedSludge = 12.6136 cm  # Width of the sludge channel
B_SedSludgeOrifices = 10 cm  # Distance center to center between drain orifices
H_SedSludge = 6.30682 cm  # Depth of the sludge channel
T_SedSludge = 4.40341 cm
T_SedSludge = 4.40341 cm
# Thickness of the plate topping the sludge channel
# through which drain holes are formed
W_SedDrainCover = 17.6136 cm
D_SedSludgeOrifice = 0.016 m  # Diameter of drain orifices
W_SedInletBottom = 0.374432 m
N_SedSludgeOrifices = 30
ND_SedSludgeValve = 3 in
# Sedimentation Tank Dimensions:
Z_SedSludge = 0.107102 m  # Height from 0 of the top of the sludge drain
H_SedBottomSlope =  # error  # Height of the bottom slope
H_SedTopSlope =  # error  # Height of the top of the inlet manifold
Z_SedSlopes = 0.337714 m  # Height from 0 of the top of the inlet manifold
W_Sed = 2 m  # Total tank wall height
L_Sed = 3.08571 m  # Total tank length
# Inlet Channel:
HW_InletChannel = 0.268262 m  # Width of the drop chimneys connecting channel to sed inlet manifolds
W_InletChannel = 0.296538 m  # length of drop chimmneys
L_Channel = 4.45 m
W_SedManifoldEntrance =  # error
L_SedManifoldEntrance =  # error
H_SedManifoldPort =  # error  # Ports at bottom of inlet chimney are set to be triangles
W_SedManifoldPort =  # error
N_SedInletPipes = 2  # per sed bay
H_InletChannel = 0.368262 m
# Sedimentation Tank Effluent Launder:
N_SedLaunderOrifices = 30  # Number of orifices per launder
Q_SedLaunderOrifices = 4.23602e-5 m^3/s  # More Launder Dimensions
ND_SedLaunder = 3 in
B_SedLaunderOrifices = 0.1 m  # Center to center launder spacing
L_SedLaunder = 2.38518 m
# Exit Channel:
D_SedLaunderOrifice = 0.393701 in
W_ExitChannel = 0.254 m
H_ExitChannel = 0.368262 m
L_ExitChannel = 4.45 m
H_PltWeir = 0.185969 m  # height of the weir carrying water to the distribution tank
HW_ExitChannel = 0.228262 m  # water height in exit channel from 0
# Lamella:
L_SedPlate = 0.4572 m
B_SedPlate = 1.99674 cm  # center to center distance between lamella
S_SedPlate = 1.7 cm  # spacing between lamella
N_SedPlates = 89  # Number of Sed Plates per Sedimentation Tank Bay.
AN_SedPlate = 60 deg
ZW_ExitChannel = 0.891995 m
V_SedC = 10.058 m/day
L_SedActive = 1.69827 m
T
V_SedUp = 70 m/day
Z_SedLaunder = 0.847545 m
H_SedPlate = 0.395947 m
H_SedAbove = 0.1289 m  # Height of water needed above the lamella
N_SedPlates = 89
HW_Sed = 0.929363 m
H_Sed = 1.02936 m
Z_Mp = 0.661101 m
N_SedPorts =  # error
H_SedBayDivider = 0.337714 m
W_SedSlopePlateRemaining =  # error
W_SedBayDivider = 0.15 m
# Sedimentation Tank Floc Hopper:
A_FlocHopper =  # error
L_FlocHopper = 0.925 m  # Length of the hopper cement plate
L_FlocHopperOffset = 0.2286 m  # distance from the edge of the channel to the bottom of the first lamella (collection distance)
W_FlocHopper = 0.05 m  # width of the hopper set within each bay
# Flow Controller:
N_Fcm = 2
ID_FcmTube = 3.175 mm
ID_FcmTube = 0.125 in
L_FcmTube = 125.479 cm
Q_FcmTubeMax = 225 mL/min
HL_FcmValve = 9.40555 cm
# Flocculator: | Look at Flocculator Positioning arrays
W_FlocChannel = 0.491841 m
# Fill last channel with bafffles from last channel
# Fix port width to be based on energy dissipation in that channel
ED_Floc = [20; 2] mW/kg
# Adjust spacing after the number of baffles per channel is known.
# Check the residence time of the flocculator should be at least 20minutes
HW_FlocEnd = 0.929363 m
X_FlocBaffles = [
    0.133651, 0.133651, 0.133651, 0.183265, 0.350714, 0.350714, 0.350714, 0.350714;
    0.307302, 0.307302, 0.307302, 0.406531, 0.741429, 0.741429, 0.741429, 0.741429;
    0.480952, 0.480952, 0.480952, 0.629796, 1.13214, 1.13214, 1.13214, 1.13214;
    0.654603, 0.654603, 0.654603, 0.853061, 1.52286, 1.52286, 1.52286, 1.52286;
    0.828254, 0.828254, 0.828254, 1.07633, 1.91357, 1.91357, 1.91357, 1.91357;
    1.0019, 1.0019, 1.0019, 1.29959, 2.30429, 2.30429, 2.30429, 2.30429;
    1.17556, 1.17556, 1.17556, 1.52286, 2.695, 2.695, 2.695, 0;
    1.34921, 1.34921, 1.34921, 1.74612, 0, 0, 0, 0;
    1.52286, 1.52286, 1.52286, 1.96939, 0, 0, 0, 0;
    1.69651, 1.69651, 1.69651, 2.19265, 0, 0, 0, 0;
    1.87016, 1.87016, 1.87016, 2.41592, 0, 0, 0, 0;
    2.04381, 2.04381, 2.04381, 2.63918, 0, 0, 0, 0;
    2.21746, 2.21746, 2.21746, 2.86245, 0, 0, 0, 0;
    2.39111, 2.39111, 2.39111, 0, 0, 0, 0, 0;
    2.56476, 2.56476, 2.56476, 0, 0, 0, 0, 0;
    2.73841, 2.73841, 2.73841, 0, 0, 0, 0, 0;
    2.91206, 2.91206, 2.91206, 0, 0, 0, 0, 0
] m
L_FlocBaffles = [
    0.679195, 0.679195, 0.679195, 0.62958, 0.462131, 0.462131, 0.462131, 0.850464;
    1.12334, 1.12334, 1.12334, 1.07373, 0.906281, 0.906281, 0.906281, 0.406315;
    0.679195, 0.679195, 0.679195, 0.62958, 0.462131, 0.462131, 0.462131, 0.850464;
    1.12334, 1.12334, 1.12334, 1.07373, 0.906281, 0.906281, 0.906281, 0.406315;
    0.679195, 0.679195, 0.679195, 0.62958, 0.462131, 0.462131, 0.462131, 0.850464;
    1.12334, 1.12334, 1.12334, 1.07373, 0.906281, 0.906281, 0.906281, 0.406315;
    0.679195, 0.679195, 0.679195, 0.62958, 0.462131, 0.462131, 0.462131, 0;
    1.12334, 1.12334, 1.12334, 1.07373, 0, 0, 0, 0;
    0.679195, 0.679195, 0.679195, 0.62958, 0, 0, 0, 0;
    1.12334, 1.12334, 1.12334, 1.07373, 0, 0, 0, 0;
    0.679195, 0.679195, 0.679195, 0.62958, 0, 0, 0, 0;
    1.12334, 1.12334, 1.12334, 1.07373, 0, 0, 0, 0;
    0.679195, 0.679195, 0.679195, 0.62958, 0, 0, 0, 0;
    1.12334, 1.12334, 1.12334, 0, 0, 0, 0, 0;
    0.679195, 0.679195, 0.679195, 0, 0, 0, 0, 0;
    1.12334, 1.12334, 1.12334, 0, 0, 0, 0, 0;
    0.679195, 0.679195, 0.679195, 0, 0, 0, 0, 0
] m
Z_FlocBaffles = [
    0, 0, 0, 0, 0, 0, 0, 0.406531;
    0.133651, 0.133651, 0.133651, 0.183265, 0.350714, 0.350714, 0.350714, 0;
    0, 0, 0, 0, 0, 0, 0, 0.406531;
    0.133651, 0.133651, 0.133651, 0.183265, 0.350714, 0.350714, 0.350714, 0;
    0, 0, 0, 0, 0, 0, 0, 0.406531;
    0.133651, 0.133651, 0.133651, 0.183265, 0.350714, 0.350714, 0.350714, 0;
    0, 0, 0, 0, 0, 0, 0, 0;
    0.133651, 0.133651, 0.133651, 0.183265, 0, 0, 0, 0;
    0, 0, 0, 0, 0, 0, 0, 0;
    0.133651, 0.133651, 0.133651, 0.183265, 0, 0, 0, 0;
    0, 0, 0, 0, 0, 0, 0, 0;
    0.133651, 0.133651, 0.133651, 0.183265, 0, 0, 0, 0;
    0, 0, 0, 0, 0, 0, 0, 0;
    0.133651, 0.133651, 0.133651, 0, 0, 0, 0, 0;
    0, 0, 0, 0, 0, 0, 0, 0;
    0.133651, 0.133651, 0.133651, 0, 0, 0, 0, 0;
    0, 0, 0, 0, 0, 0, 0, 0
] m
N_FlocChannels = 8
L_FlocTank = 24.6857 m
HL_Floc = 27.7632 cm
HW_FlocStart = 1.20699 m
S_FlocBaffle = [13.3651; 13.3651; 13.3651; 18.3265; 35.0714; 35.0714; 35.0714; 40.6531] cm
B_FlocBaffle = [17.3651; 17.3651; 17.3651; 22.3265; 39.0714; 39.0714; 39.0714; 44.6531] cm
N_FlocChannelBaffles = [17; 17; 17; 13; 7; 7; 7; 6]
W_FlocPort = [0.0836508; 0.0836508; 0.0836508; 0.133265; 0.300714; 0.300714; 0.300714; 0.356531] m
HL_FlocChannels = [6.89023; 6.89023; 6.89023; 2.99903; 1.0995; 1.0995; 1.0995; 0.794945] cm
L_FlocBaffleLower = [0.679195; 0.679195; 0.679195; 0.62958; 0.462131; 0.462131; 0.462131; 0.406315] m
L_FlocBaffleUpper = [1.12334; 1.12334; 1.12334; 1.07373; 0.906281; 0.906281; 0.906281; 0.850464] m
H_FlocPort = [0.785825; 0.785825; 0.785825; 0.676375; 0.573619; 0.573619; 0.573619; 0.560816] m
Ti_Floc = 18.8063 min  # residence time of the flocculator
N_FlocBaffles = 91
# Rapid Mix Unit and Entrance Tank:
L_Et = 1.11098 m
W_Et = 1.11098 m
H_Et = 1.60699 m  # Height of Entrance Tank Orifice
W_EtOrifice[30] = 0.031 m
L_trueET[30] = 0.258528 m  # Length of Entrance Tank Orifice
Pi_EtFlow[30] = 0.278388  # Ratio of the minimum flow divided by the maximum flow through the plant.
L_FlocEntryOrifice = 49.1841 cm  # Length of orifice entering into flocculator from Rapid Mix Unit
W_FlocEntryOrifice = 2.64149 cm  # Height of orifice entering into flocculator
ED_Diffusion =  # error  # Minimum Energy Dissipation needed
HL_FlocEntryOrifice = 4.50796 cm  # Head loss caused by entering flocculation tank.
A_FlocEntry = 0.0129919 m^2
A_EtOrifice = 80.1436 cm^2
HW_EtTotal =  # error  # Total Height of water at beginning of rapid mix unit
HW_Channel2 =  # error  # Height of water at the back of the entrance tank channel (from channel bottom)
HW_EtChannel = 5.39211 cm  # Height of Waterfall into flocculator
W_EtChannel = 13.3651 cm  # Widt of entrance tank channel
Vol_Stock = 810 L  # Volume of chemical stock tanks
ZW_ExitChannel = 0.891995 m  # Water Level at the end of the plant in the exit channel and exit channel box
HW_Sed = 0.929363 m
HW_FlocStart = 1.20699 m  # Water level at the beginning of the floc tank
HL_Floc = 27.7632 cm  # just for ref. the head loss throught the floc tank
HW_EtTotal =  # error  # Height of the water in the entrance channel
# Materials List:
L_LaunderPipe =  # error
N_Launders = 8
L_LaunderPipeTotal = 19.0814 m
N_Valves = 4
N_LaunderCouplings = 8
N_ValveCouplings = 4
N_SedPlatesTotal = 356
N_SedPlatesPerSheet = 8
N_SedPlateSheets = 45
N_PipeSedPlateStand =  # error
A_SedTank =  # error
# [reference: AutoCADMasterProgram.xmcd]
# AutoCAD References
AC_SedTank =  # error
AC_EntranceTank = [
    "-layer m entrancetank";
    "c t 214,214,214";
    "entrancetank";
    "  ";
    "_-view o t _zoom w 0.16,9.27472,0 -1.27098,10.70571,1.60699 _box 0,9.43472,0 -1.11098,10.54571,1.60699 _box 0.15,9.28472,-0.15 -1.26098,10.69571,1.60699 _subtract 0.15,9.28472,-0.15  0,9.43472,0 ";
    "-layer s 0";
    "  ";
    "-layer f entrancetank";
    "  ";
    "-layer s entrancetank";
    "  ";
    "_box -1.11098,9.28472,1.55699 -0.97733,9.43472,1.60699";
    "-layer s 0";
    "  ";
    "-layer t entrancetank";
    "  ";
    "_-view o t";
    "_subtract 0.15,9.43472,0  -1.11098,9.28472,1.55699 ";
    "-layer f entrancetank";
    "  "
]
AC_FlocTank =  # error
