# [reference: MasterProgram.xmcd]
# Automated Materials List
# **This is for vertical flocculator; Calculate for horizontal in the future**
# Sedimentation Tank Plates
N_SedPlatesTotal := N_SedPlates*N_SedBays*N_SedTanks = 280  # ***Purple variables are verified***
N_SedPlatesPerSheet := floor(L_SedPlateSheet/L_SedPlate) = 6
N_SedPlateSheets := ceil(N_SedPlatesTotal/N_SedPlatesPerSheet) = 47
# Floc Channel and Tank Walls
A_FlocFloor := (L_Sed + 2*T_PlantWall)*(W_FlocChannel*N_FlocChannels + T_PlantWall*(N_FlocChannels + 1)) = 13.6946 m^2
A_FlocWalls := ((H_Floc*L_Sed) - (H_FlocPort[N_FlocChannels - 1]*W_FlocPort[N_FlocChannels - 1])) + (L_Sed*H_Floc) + ((N_FlocChannels*W_FlocChannel + ((N_FlocChannels + 1)*T_PlantWall))*H_Floc) + ((N_FlocChannels - 1)*((L_Sed*H_Floc) - (H_FlocPort[0]*W_FlocPort[0]))) = 46.4618 m^2
Vol_FlocFloor := A_FlocFloor*T_PlantWall = 2.05419 m^3
Vol_FlocWalls := A_FlocWalls*T_PlantWall = 6.96927 m^3
# Sed Tank Components
A_SedWalls := (N_SedTanks + 1)*(L_Sed*H_Sed - ((H_ExitChannel*W_ExitChannel) + (H_InletChannel*W_InletChannel))) + ((N_SedTanks*W_Sed) + ((T_PlantWall*(N_SedTanks + 1))*2))*H_Sed = 39.1623 m^2
Vol_SedWalls := A_SedWalls*T_PlantWall = 5.87434 m^3
A_SedFloor := (L_Sed + 2*T_PlantWall)*(N_SedTanks*W_Sed + (N_SedTanks + 1)*T_PlantWall) = 19.2866 m^2
Vol_SedFloor := A_SedFloor*T_PlantWall = 2.89299 m^3
# Entrance Tank Components
A_EtWalls := 2*(H_Et*(L_Et + (2*T_EtWall))) + 2*(H_Et*W_Et) = 14.6503 m^2
A_EtFloor := (W_Et + 2*T_EtWall)*(L_Et + 2*T_EtWall) = 3.3921 m^2  # Surface area of Tank floor
Vol_EtWalls := A_EtWalls*T_EtWall = 2.19754 m^3
Vol_EtFloor := A_EtFloor*T_EtWall = 0.508815 m^3
Vol_EntranceTank := Vol_EtFloor + Vol_EtWalls = 2.70636 m^3  # Volume of concrete needed to build Entrance Tank
N_EtDrainStoppers := N_Et.Hoppers
N_EtDrains := N_Et.Hoppers
L_EtWeir = 1.557 m
# What is the distance between the bottom of the hopper and the opposite side of the tank? What are the lengths of the parallel sides for the hopper under the trash racks? how should I calculate the trapezoidal prism?
D_EtWeir =  # error: This variable is undefined.
# Volume for the hoppers
Vol_Hoppers := 2*(W_Et - L_bottom)*H_EtHopper^2*1/sqrt(3)
# ***Turquoise variables are intermediate variables***
L_InletTank := S_Elbow + ElbowRadius(ND_PltWeir) + ConRadius(ND_PltWeir) + SocketDepth(ND_PltWeir) = 0.323694 m
W_InletTank := ((2*ConRadius(ND_PltWeir)) + (2*S_Elbow))
Vol_InletTankWalls := (((L_InletTank + 2*T_ChannelWall)*(W_InletTank + 2*T_ChannelWall)) - (L_InletTank*W_InletTank) - ((L_InletTank - T_ChannelWall)*T_ChannelWall))*H_InletChannel = 0.0817249 m^3
A_InletTankFloor := (W_InletTank + 2*T_ChannelWall)*(L_InletTank + 2*T_ChannelWall) = 0.329677 m^2
Vol_InletTankFloor := A_InletTankFloor*T_ChannelWall = 0.0494515 m^3
Vol_InletChannelTank := Vol_InletTankFloor + Vol_InletTankWalls = 0.131176 m^3
L_ExitTank := S_Elbow + ElbowRadius(ND_PltWeir) + ConRadius(ND_PltWeir) + SocketDepth(ND_PltWeir) = 0.323694 m
W_ExitTank := 4*ConRadius(ND_PltWeir) + 3*S_Elbow = 0.407175 m
A_ExitTankWalls := (L_ExitTank*T_ChannelWall) + 2*((W_ExitTank + 2*T_ChannelWall)*T_ChannelWall) = 0.260707 m^2
Vol_ExitTankWalls := A_ExitTankWalls*H_ExitChannel = 0.0927849 m^3
A_ExitTankFloor := (L_ExitTank + 2*T_ChannelWall)*(W_ExitTank + 2*T_ChannelWall) = 0.441061 m^2
Vol_ExitTankFloor := A_ExitTankFloor*T_ChannelWall = 0.0661591 m^3
# Exit and Inlet Channel Components
Vol_ExitChannelTank := Vol_ExitTankFloor + Vol_ExitTankWalls = 0.158944 m^3
A_ExitChannelWalls := L_Channel*(H_ExitChannel + T_ChannelWall) = 2.5649 m^2
# **Area and Volume of the walls are only for the INSIDE wall; the outside wall is already inlcuded in the area and volume of the sed walls.**
A_ExitChannelFloor := L_Channel*W_ExitChannel = 1.89196 m^2
Vol_ExitChannelWalls := A_ExitChannelWalls*T_ChannelWall = 0.384735 m^3
Vol_ExitChannelFloor := A_ExitChannelFloor*T_ChannelWall = 0.283794 m^3
A_InletChannelWalls := L_Channel*(H_InletChannel + T_ChannelWall) = 2.5649 m^2
A_InletChannelFloor := L_Channel*W_InletChannel = 2.08802 m^2
Vol_InletChannelWall := A_InletChannelWalls*T_ChannelWall = 0.384735 m^3
Vol_InletChannelFloor := A_InletChannelFloor*T_ChannelWall = 0.313203 m^3
# Sed Tank Slopes
A_SedSlope := Z_SedSlopes*(W_SedBay - W_SedSludge)/2 = 0.403401 m^2  # **Cross Sectional Area of One Slope**
A_SedSlopes := A_SedSlope*N_SedBays*N_SedTanks = 1.6136 m^2
Vol_SedSlopes := A_SedSlopes*L_Sed = 5.65417 m^3
# Ferrous Cement/Plastic Baffles
Vol_DistributionTunnelCovers := T_SedSlopePlate*L_SedSlopeManifold*W_SedSlopePlate*N_SedPorts
A_DistributionTunnelCovers := Vol_DistributionTunnelCovers/T_SedSlopePlate
# If P_FlocChannelMin > P_FlocChannelVPlastic  then use ferrous cement, if not use plastic baffles.
# Logic taken from flow chart in Floc3 code.
Vol_FlocBafflesTotal :=
    (W_FlocChannel*T_FlocBaffle*(L_FlocBaffleLower*ceil(N_FlocChannelBaffles/2) + L_FlocBaffleUpper*floor(N_FlocChannelBaffles/2))) if P_FlocChannelMin > P_FlocChannelVPlastic
    0*m^3 otherwise
Vol_FlocBafflesTotal = 0 m^3
P_FlocChannelMin = 0.130717 m
P_FlocChannelVPlastic = 0.54 m
A_FlocBafflesTotal := Vol_FlocBafflesTotal/T_FlocBaffle  # **new variable defined here**
A_FlocBafflesTotal = 0 m^2
# Pipes and Valves of Sed Tank
N_PipeSedPlateFrame := W_Sed/B_SedPipe - 1 + L_Sed/B_SedPipe - 1
L_PipeSedPlateFrameTotal := N_SedTanks*((W_Sed/B_SedPipe - 1)*L_Sed + (L_Sed/B_SedPipe - 1)*W_Sed)
# Length of pipe needed for Sedimentation Tank Plate Frame at ND.SedPlateFrame
L_Weir := 2*H_PltWeir = 0.531796 m  # Total length of Weir pipe in Inlet and Exit Channel Tanks at ND.PltWeir
L_SedLaunder = 2.36112 m
N_Launders := N_SedTanks*N_SedBays*N_SedLaunders = 4
L_LaunderPipeTotal := L_SedLaunder*N_Launders = 9.44446 m
N_LaunderCouplings := N_Launders = 4  # Number of couplings for launder pipe going through concrete wall
N_Valves := N_SedBays*N_SedTanks = 4
N_ValveCouplings := N_Valves = 4
# Filter Piping and Fittings
# To be completed once the pipes and fittings are drawn.
# Filter Box Floor and Walls
A_FilterWallsTotal := H_Fi*(3*W_Fi + 2*L_Fi)
# Chemical Storage Tanks
L_PVCPipeTotal := L_FirstPipe + L_SecondPipe + L_ThirdPipe + L_FourthPipe + L_FinalPipe
SA_PVCPipeTotal := 2*π*.840*L_PVCPipeTotal  # .840 inches is the actual outer diameter for a 1/2" PVC pipe
SA_CoagTank := 4*π*R_CoagTank^2
