# Automated Materials List
# **This is for vertical flocculator; Calculate for horizontal in the future**
# Sedimentation Tank Plates
N_SedPlatesTotal := N_SedPlates*N_SedBays*N_SedTanks = 5408  # ***Purple variables are verified***
N_SedPlatesPerSheet := floor(L_SedPlateSheet/L_SedPlate) = 7
N_SedPlateSheets := ceil(N_SedPlatesTotal/N_SedPlatesPerSheet) = 773
# Floc Channel and Tank Walls
A_FlocFloor := (L_Sed + 2*T_PlantWall)*(W_FlocChannel*N_FlocChannels + T_PlantWall*(N_FlocChannels + 1)) = 123.291 m^2
A_FlocWalls := ((H_Floc*L_Sed) - (H_FlocPort[N_FlocChannels - 1]*W_FlocPort[N_FlocChannels - 1])) + (L_Sed*H_Floc) + ((N_FlocChannels*W_FlocChannel + ((N_FlocChannels + 1)*T_PlantWall))*H_Floc) + ((N_FlocChannels - 1)*((L_Sed*H_Floc) - (H_FlocPort[0]*W_FlocPort[0]))) = 180.699 m^2
Vol_FlocFloor := A_FlocFloor*T_PlantWall = 18.4937 m^3
Vol_FlocWalls := A_FlocWalls*T_PlantWall = 27.1048 m^3
# Sed Tank Components
A_SedWalls := (N_SedTanks + 1)*(L_Sed*H_Sed - ((H_ExitChannel*W_ExitChannel) + (H_InletChannel*W_InletChannel))) + ((N_SedTanks*W_Sed) + ((T_PlantWall*(N_SedTanks + 1))*2))*H_Sed = 175.161 m^2
Vol_SedWalls := A_SedWalls*T_PlantWall = 26.2742 m^3
A_SedFloor := (L_Sed + 2*T_PlantWall)*(N_SedTanks*W_Sed + (N_SedTanks + 1)*T_PlantWall) = 269.029 m^2
Vol_SedFloor := A_SedFloor*T_PlantWall = 40.3544 m^3
# Entrance Tank Components
A_EtWalls := 2*(H_Et*(L_Et + (2*T_EtWall))) + 2*(H_Et*W_Et) = 52.6433 m^2
A_EtFloor := (W_Et + 2*T_EtWall)*(L_Et + 2*T_EtWall) = 28.09 m^2  # Surface area of Tank floor
Vol_EtWalls := A_EtWalls*T_EtWall = 7.8965 m^3
Vol_EtFloor := A_EtFloor*T_EtWall = 4.2135 m^3
Vol_EntranceTank := Vol_EtFloor + Vol_EtWalls = 12.11 m^3  # Volume of concrete needed to build Entrance Tank
Vol_StockTank := Q_AlumStockMax*Ti_StockMin
# ***Pink variables are unable to be calculated at this time***
R_StockTank := D_StockTank/2
H_StockTank := Vol_StockTank/(pi*R_StockTank^2)  # **Stock Tank is not drawn yet**
A_StockTank := 2*pi*R_StockTank^2 + 2*pi*R_StockTank*H_StockTank
A_StockTankFloor := Vol_StockTank/(2*R_StockTank)
# ***Turquoise variables are intermediate variables***
L_InletTank := S_Elbow + ElbowRadius(ND_PltWeir) + ConRadius(ND_PltWeir) + SocketDepth(ND_PltWeir) = 1.00544 m
W_InletTank := ((2*ConRadius(ND_PltWeir)) + (2*S_Elbow))
Vol_InletTankWalls := (((L_InletTank + 2*T_ChannelWall)*(W_InletTank + 2*T_ChannelWall)) - (L_InletTank*W_InletTank) - ((L_InletTank - T_ChannelWall)*T_ChannelWall))*H_InletChannel = 0.419621 m^3
A_InletTankFloor := (W_InletTank + 2*T_ChannelWall)*(L_InletTank + 2*T_ChannelWall) = 1.15881 m^2
Vol_InletTankFloor := A_InletTankFloor*T_ChannelWall = 0.173822 m^3
Vol_InletChannelTank := Vol_InletTankFloor + Vol_InletTankWalls = 0.593443 m^3
L_ExitTank := S_Elbow + ElbowRadius(ND_PltWeir) + ConRadius(ND_PltWeir) + SocketDepth(ND_PltWeir) = 1.00544 m
W_ExitTank := 4*ConRadius(ND_PltWeir) + 3*S_Elbow = 1.12536 m
A_ExitTankWalls := (L_ExitTank*T_ChannelWall) + 2*((W_ExitTank + 2*T_ChannelWall)*T_ChannelWall) = 0.578424 m^2
Vol_ExitTankWalls := A_ExitTankWalls*H_ExitChannel = 0.55211 m^3
A_ExitTankFloor := (L_ExitTank + 2*T_ChannelWall)*(W_ExitTank + 2*T_ChannelWall) = 1.86072 m^2
Vol_ExitTankFloor := A_ExitTankFloor*T_ChannelWall = 0.279108 m^3
# Exit and Inlet Channel Components
Vol_ExitChannelTank := Vol_ExitTankFloor + Vol_ExitTankWalls = 0.831219 m^3
A_ExitChannelWalls := L_Channel*(H_ExitChannel + T_ChannelWall) = 19.5608 m^2
# **Area and Volume of the walls are only for the INSIDE wall; the outside wall is already inlcuded in the area and volume of the sed walls.**
A_ExitChannelFloor := L_Channel*W_ExitChannel = 17.9328 m^2
Vol_ExitChannelWalls := A_ExitChannelWalls*T_ChannelWall = 2.93413 m^3
Vol_ExitChannelFloor := A_ExitChannelFloor*T_ChannelWall = 2.68992 m^3
A_InletChannelWalls := L_Channel*(H_InletChannel + T_ChannelWall) = 19.5608 m^2
A_InletChannelFloor := L_Channel*W_InletChannel = 22.0918 m^2
Vol_InletChannelWall := A_InletChannelWalls*T_ChannelWall = 2.93413 m^3
Vol_InletChannelFloor := A_InletChannelFloor*T_ChannelWall = 3.31377 m^3
# Sed Tank Slopes
A_SedSlope := Z_SedSlopes*(W_SedBay - W_SedSludge)/2 = 0.335462 m^2  # **Cross Sectional Area of One Slope**
A_SedSlopes := A_SedSlope*N_SedBays*N_SedTanks = 5.36738 m^2
Vol_SedSlopes := A_SedSlopes*L_Sed = 79.9246 m^3
# Ferrous Cement/Plastic Baffles
Vol_DistributionTunnelCovers := T_SedSlopePlate*L_SedSlopeManifold*W_SedSlopePlate*N_SedPorts
A_DistributionTunnelCovers := Vol_DistributionTunnelCovers/T_SedSlopePlate
# If P_FlocChannelMin > P_FlocChannelVPlastic  then use ferrous cement, if not use plastic baffles.
# Logic taken from flow chart in Floc3 code.
Vol_FlocBafflesTotal :=
    (W_FlocChannel*T_FlocBaffle*(L_FlocBaffleLower*ceil(N_FlocChannelBaffles/2) + L_FlocBaffleUpper*floor(N_FlocChannelBaffles/2))) if P_FlocChannelMin > P_FlocChannelVPlastic
    0*m^3 otherwise
Vol_FlocBafflesTotal =  # error: This variable is undefined.
P_FlocChannelMin =  # error
P_FlocChannelVPlastic =  # error
A_FlocBafflesTotal := Vol_FlocBafflesTotal/T_FlocBaffle  # **new variable defined here**
A_FlocBafflesTotal =  # error
# Pipes and Valves of Sed Tank
N_PipeSedPlateFrame := W_Sed/B_SedPipe - 1 + L_Sed/B_SedPipe - 1
L_PipeSedPlateFrameTotal := N_SedTanks*((W_Sed/B_SedPipe - 1)*L_Sed + (L_Sed/B_SedPipe - 1)*W_Sed)
# Length of pipe needed for Sedimentation Tank Plate Frame at ND.SedPlateFrame
L_Weir := 2*H_PltWeir = 1.72902 m  # Total length of Weir pipe in Inlet and Exit Channel Tanks at ND.PltWeir
L_SedLaunder =  # error
N_Launders := N_SedTanks*N_SedBays*N_SedLaunders = 16
L_LaunderPipeTotal := L_SedLaunder*N_Launders = 197.293 m
N_LaunderCouplings := N_Launders = 16  # Number of couplings for launder pipe going through concrete wall
N_Valves := N_SedBays*N_SedTanks = 16
N_ValveCouplings := N_Valves = 16
