# [reference: MasterProgram.xmcd]
# Automated Materials List
N_SedPlatesTotal := N_SedPlates*N_SedBays*N_SedTanks
N_SedPlatesPerSheet := floor(L_SedPlateSheet/L_SedPlate)
N_SedPlateSheets := ceil(N_SedPlatesTotal/N_SedPlatesPerSheet) = 44  # Total number of corrugated sheets needed to construct lamella/plate settlers
# Channel and Tank Walls
A_FlocFloor := (L_Sed + 2*T_PlantWall)*(W_FlocChannel*N_FlocChannels + T_PlantWall*(N_FlocChannels + 1)) = 13.7121 m^2
A_FlocWalls := ((H_Floc*L_Sed) - (H_FlocPort[N_FlocChannels - 1]*W_FlocPort[N_FlocChannels - 1])) + (L_Sed*H_Floc) + ((N_FlocChannels*W_FlocChannel + ((N_FlocChannels + 1)*T_PlantWall))*H_Floc) + ((N_FlocChannels - 1)*((L_Sed*H_Floc) - (H_FlocPort[0]*W_FlocPort[0]))) = 43.5396 m^2
Vol_FlocFloor := A_FlocFloor*T_PlantWall = 2.05682 m^3
# **This is for vertical flocculator; Calculate for horizontal in the future**
Vol_FlocWalls := A_FlocWalls*T_PlantWall = 6.53093 m^3
A_SedWalls := (N_SedTanks + 1)*(L_Sed*H_Sed - ((H_ExitChannel*W_ExitChannel) + (H_InletChannel*W_InletChannel))) + ((N_SedTanks*W_Sed) + ((T_PlantWall*(N_SedTanks + 1))*2))*H_Sed = 21.483 m^2
Vol_SedWalls := A_SedWalls*T_PlantWall = 3.22245 m^3
A_SedFloor := (L_Sed + 2*T_PlantWall)*(N_SedTanks*W_Sed + (N_SedTanks + 1)*T_PlantWall) = 15.0664 m^2
Vol_SedFloor := A_SedFloor*T_PlantWall = 2.25996 m^3
Vol_EntranceTank := 2*(W_Et*T_EtWall*H_Et) + 2*(L_Et*T_EtWall*H_Et) - (T_EtWall*W_EtChannel*W_EtChannel) = 1.34095 m^3
# **basic dimensions - no grit chamber**
A_EtWalls := 2*(H_Et*(L_Et + T_EtWall)) + 2*H_Et(W_Et + 2*T_EtWall) - W_EtChannel*W_EtChannel  # error: This value must be a function, but has the form: Length.
A_EtFloor := (W_Et + 2*T_EtWall)*(L_Et + 2*T_EtWall) = 1.99088 m^2
# **Assuming L.Et is marked as the top diagram on the materials list wiki**
Vol_EtWalls := Vol_EntranceTank = 1.34095 m^3
W_ExitChannel = 0.254 m
Vol_EtFloor := (L_Et + 2*T_EtWall)*(W_Et + 2*T_EtWall)*T_EtFloor
H_ExitChannel = 0.335348 m
Vol_StockTank := Q_AlumStockMax*Ti_StockMin = 0.81 m^3
L_Sed + 2*T_PlantWall - 2*W_ExitChannel = 2.87771 m
# **D.StockTank is a user input, newly created**
R_StockTank := D_StockTank/2
H_StockTank := Vol_StockTank/(pi*R_StockTank^2)
# **new variable defined here**
A_StockTank := 2*pi*R_StockTank^2 + 2*pi*R_StockTank*H_StockTank  # **new variable defined here**
A_StockTankFloor := Vol_StockTank/(2*R_StockTank)  # **new variable defined here**
Vol_ExitChannelTank := (2*(S_Elbow + 3*ND_PltWeir + T_ChannelWall) + 2*(4*ND_PltWeir + 3*S_Elbow + T_ChannelWall))*H_Sed*T_ChannelWall = 0.90395 m^3
H_InletTank := H_InletChannel + T_ChannelWall = 0.485348 m
A_InletTankLWall := (((2*ConRadius(ND_PltWeir)) + (2*S_Elbow) + 2*T_ChannelWall)*T_ChannelWall) + (T_ChannelWall*T_ChannelWall) = 0.121934 m^2
A_InletTankSideWall := (((2*ConRadius(ND_PltWeir)) + (2*S_Elbow) + T_ChannelWall)*T_ChannelWall) + ((T_ChannelWall - S_Elbow)*T_ChannelWall) = 0.0919335 m^2
A_InletTankBackWall := (S_Elbow + ElbowRadius(ND_PltWeir) + ConRadius(ND_PltWeir) + SocketDepth(ND_PltWeir))*T_ChannelWall = 0.0825367 m^2
Vol_InletTankWalls := (A_InletTankBackWall + A_InletTankLWall + A_InletTankSideWall)*H_InletTank = 0.143859 m^3
H_InletChannel*((L_InletTankFloor*W_InletTankFloor) - (((S_Elbow + ElbowRadius(ND_PltWeir) + ConRadius(ND_PltWeir) + SocketDepth(ND_PltWeir))*((2*ConRadius(ND_PltWeir)) + (2*S_Elbow))) + (((S_Elbow + ElbowRadius(ND_PltWeir) + ConRadius(ND_PltWeir) + SocketDepth(ND_PltWeir)) - T_ChannelWall)*T_ChannelWall))) =  # error: This variable is undefined.
L_InletTankFloor := ((S_Elbow + ElbowRadius(ND_PltWeir) + ConRadius(ND_PltWeir) + SocketDepth(ND_PltWeir)) + 2*T_ChannelWall) = 0.850245 m
W_InletTankFloor := (2*ConRadius(ND_PltWeir)) + (2*S_Elbow) + 2*T_ChannelWall = 0.66289 m
A_InletTankFloor := L_InletTankFloor*W_InletTankFloor = 0.563619 m^2
Vol_InletTankFloor := A_InletTankFloor*T_ChannelWall = 0.0845428 m^3
Vol_InletChannelTank := Vol_InletTankFloor + H_InletChannel*((L_InletTankFloor*W_InletTankFloor) - (((S_Elbow + ElbowRadius(ND_PltWeir) + ConRadius(ND_PltWeir) + SocketDepth(ND_PltWeir))*((2*ConRadius(ND_PltWeir)) + (2*S_Elbow))) + (((S_Elbow + ElbowRadius(ND_PltWeir) + ConRadius(ND_PltWeir) + SocketDepth(ND_PltWeir)) - T_ChannelWall)*T_ChannelWall))) = 0.186456 m^3
A_ExitChannelWalls := L_Channel*(H_ExitChannel + T_ChannelWall) = 2.1598 m^2
# **Area and Volume of the walls are only for the INSIDE wall; the outside wall is already inlcuded in the area and volume of the sed walls.**
A_ExitChannelFloor := L_Channel*W_ExitChannel = 1.1303 m^2
Vol_ExitChannelWalls := A_ExitChannelWalls*T_ChannelWall = 0.32397 m^3
Vol_ExitChannelFloor := A_ExitChannelFloor*T_ChannelWall = 0.169545 m^3
# **Area and Volume of the walls are only for the INSIDE wall; the outside wall is already inlcuded in the area and volume of the sed walls.**
A_InletChannelWalls := L_Channel*(H_InletChannel + T_ChannelWall) = 2.1598 m^2
A_InletChannelFloor := L_Channel*W_InletChannel = 1.99636 m^2
Vol_InletChannelWall := A_InletChannelWalls*T_ChannelWall = 0.32397 m^3
Vol_InletChannelFloor := A_InletChannelFloor*T_ChannelWall = 0.299454 m^3
# **Cross Sectional Area of One Slope**
A_SedSlope := 1/2*(tan(AN_SedPlate)*(1/2*(W_SedBay - W_SedSludge) - 1/2*(W_SedDrainCover - W_SedSludge))^2) + ((1/2*(W_SedBay - W_SedSludge) - 1/2*(W_SedDrainCover - W_SedSludge))*tan(AN_SedPlate) + T_SedSludge + H_SedSludge)*T_ConcreteMin + ((T_SedSludge + H_SedSludge)*(1/2*(W_SedBay - W_SedSludge) - 1/2*(W_SedDrainCover - W_SedSludge)) + H_SedSludge*(W_SedDrainCover - W_SedSludge)/2) = 0.218199 m^2
# Ferrous Cement
Vol_DistributionTunnelCovers := T_SedSlopePlate*L_SedSlopeManifold*W_SedSlopePlate*N_SedPorts
A_DistributionTunnelCovers := Vol_DistributionTunnelCovers/T_SedSlopePlate
Vol_FlocBafflesTotal := W_FlocChannel*T_FlocBaffle*(L_FlocBaffleLower*ceil(N_FlocChannelBaffles/2) + L_FlocBaffleUpper*floor(N_FlocChannelBaffles/2)) = 1.97082 m^3
A_FlocBafflesTotal := Vol_FlocBafflesTotal/T_FlocBaffle = 49.2706 m^2  # **new variable defined here**
# Pipes and Valves
N_PipeSedPlateFrame := W_Sed/B_SedPipe - 1 + L_Sed/B_SedPipe - 1
L_PipeSedPlateFrameTotal := N_SedTanks*((W_Sed/B_SedPipe - 1)*L_Sed + (L_Sed/B_SedPipe - 1)*W_Sed)
# Length of pipe needed for Sedimentation Tank Plate Frame at ND.SedPlateFrame
L_Weir := 2*H_PltWeir = 0.306109 m  # Total length of Weir pipe in Inlet and Exit Channel Tanks at ND.PltWeir
N_Launders := N_SedTanks*N_SedBays*N_SedLaunders
L_LaunderPipeTotal := L_SedLaunder*N_Launders = 17.0328 m  # Total length of launder pipe at ND.SedLaunder
N_LaunderCouplings := N_Launders  # Number of couplings for launder pipe going through concrete wall
N_Valves := N_SedBays*N_SedTanks  # Valves and valve couplings to drain sedimentation tanks
N_ValveCouplings := N_Valves
