EN_MatApply := 1  # EN.MatApply equals 0 if materials are not to be applied, otherwise materials are applied
# Material Constants - General
E_Pvc := 0.12 mm
E_Concrete := 2 mm
ρ_Concrete := 2400*kg/m^3  # used in the sed tank drawing
T_ConcreteMin := 5 cm  # used throughout the code
EN_DrillSeries := 0
# 0 is English, 1 is metric, drill series is needed for the drill series at the bottom of this sheet and tube series is needed for the Cdc code
EN_TubeSeries := 0
D_Rebar := 1/2*in
USD := ¤  # Defining US Dollars as a currency unit
Lem := USD/19.06  # Lempira/US Dollar exchange rate as of 3/5/2012
# Material Constants - Entrance Tank
T_LfomSheet := T_ConcreteMin
ND_EtFloat := 8 in
ND_EtDrainMin := 3 in  # Minimum pipe size to handle grit and to ensure that the pipe can be easily unclogged
ND_EtDrain := 3 in  # This is constant for now
T_EtRemovableWall := 5 cm
H_EtRemovableWallSupport := 4 cm  # Parameters are arbitrary - need to be calculated
T_EtRemovableWallSupport := 5 cm
T_EtHopperLedge := 15 cm
T_EtWeir := 6 cm
T_RMOrificePlate := 2 cm
ND_RMAirRelease := 1 in
# Material Constants - Chem Storage Tanks
T_ChemTankWall := 5 mm
# Supplier Information:
# http://www.rotoplas.com/assets/files/industria/catalogo.pdf
# Tank Volume | Tank Diameter | Tank Height
Vol_SupplierChemTank := [208.198 L; 450 L; 600 L; 750 L; 1100 L; 2500 L]
Dimensions_SupplierChemTank := [22.5 in, 33.5 in; 0.85 m, 0.99 m; 0.96 m, 1.10 m; 1.10 m, 1.02 m; 1.10 m, 1.39 m; 1.55 m, 1.65 m]
Factor := [1.05; 1.05; 1.05; 1.05; 1.05; 1.05]
# Material Constants - CDC
D_TubeEnglish := [1; 2; 3; 4; 5; 6; 7]*in/16
D_CdcBarb := [0.047 in; 0.075 in; 2.5 mm; 3 mm; 4 mm; 0.201 in]
D_TubeMetric := [2; 3; 4; 6; 8; 10]*mm
D_CdcBarb1 := [0.047 in; 0.07 in; 0.075 in; 2.5 mm; 3 mm; 0.201 in]
E_Tube := 0 mm  # Tubing roughness height
D_FltVlvOrificesAvail := [0.093 in; 0.187 in; 0.25 in; 0.312 in]
# Material Constants - Flocculator
T_FlocBaffleRigidH := 15 cm
T_FlocBaffleRigidV := 5 cm
L_ChannelSlot := 5 cm  # Low flow flocculator ferrocement slots - length extending into the flocculator wall
ND_FlocModulesMain := 1/2*in  # The piping size for the main part of the floc modules
ND_FlocModulesLarge := 1.5 in  # The diameter of the oversized cap used to assemble the floc modules
T_FlocChannelWallMidFlow := 15 cm
# Material Constants - Sedimentation Tank
L_SedPlateSheet := 300 cm
W_SedPlate := 42 in
W_SedBay := W_SedPlate
W_Plastic := W_SedPlate
T_SedPlate := 0.2 cm
S_SedPlateMin := 2.5 cm  # This is to prevent floc roll up. We should specify this in a more fundamental way. (based on velocity gradients)
S_SedPlate := S_SedPlateMin
AN_SedPlate := 60 deg
T_SedWeir := 4 cm
T_SedWallDivider := 15 cm
M_DrainCoverMax := 20 kg
L_SedPlateCantilevered := 20 cm
# Maximum length of sed plate sticking out past module pipes without any additional support. The goal is to prevent floppy modules that don't maintain constant distances between the plates
B_SedPlate := S_SedPlate + T_SedPlate
N_SedModulePlatesMax := floor(L_SedPlateCantilevered/B_SedPlate*tan(AN_SedPlate) + 1) = 13
N_SedModulePlatesMin := 8
PlateIndex :=
    for j ∈ N_SedModulePlatesMin .. N_SedModulePlatesMax
        for i ∈ 0 .. 50
            matrix[i, j - N_SedModulePlatesMin] ← j*(i + 1)
    array ← matrix[:, 0]
    for j ∈ N_SedModulePlatesMin + 1 .. N_SedModulePlatesMax
        array ← stack(array, matrix[:, j - N_SedModulePlatesMin])
    array ← sort(array)
    i ← 0
    while i < (last(array) - 1)
        array ← stack(submatrix(array, 0, i, 0, 0), submatrix(array, i + 2, last(array), 0, 0)) if array[i] == array[i + 1]
        array ← submatrix(array, 0, i + 1, 0, 0) if (i + 1 == i + 2 and i + 2 == last(array))
        i ← i + 1
    return array
# Plate Settler Pipe Frame
ND_SedPlateFrame := 1.5 in
B_SedFrameSupport := 1/3*m
T_Flange := 1 cm
ND_SedFrameStub := 1/2*in
B_SedPlateFrameVertical := 10 cm  # Distance from the wall to the vertical pipe of the main plate settler support frame
D_Flange := 6 in
T_SedWeirBaffle := 3 cm
ND_SedHopperDrain := 1 in
ND_SedHopperViewer := 2 in
ND_SedSkimmer := 2 in
# Diffusers/Jet Reverser
W_SedDiffuserOutlet := 1 cm
ND_SedDiffuser := 1 in
ND_SedJetReverser := 3 in
# Material Constants - SRSF
T_FiWall := 25 cm
ND_FiKeyPipe := 1.5 in
# Schedule 40 or Schedule 80 for slotted branches????? Schedule 40 has larger ID and that increases the max flow rate it can handle and thus increases the allowable width of the filter. Schedule 40 for strength and servicability. This changes the dimensions of the filter box and the constraints for the entrance and exit boxes.
PS_FiBranch := 2
ND_FiManBranch := 1 in
# We are going to take this pipe size for the slotted pipes as a given. Larger pipes may block too much flow and they are harder to install.
ND_FiBwManBranch := 1.5 in
W_FiManSlots := 0.008 in = 0.2032 mm  # A slot thickness of 0.008 in or 0.2 mm is selected so that sand will not enter the slotted pipes.
B_SlotsAvailable := [1/8*in; 3/16*in; 1/4*in] = [3.175; 4.7625; 6.35] mm  # These are the possible spacings for the slots that our supplier can fabricate
ND_FiBranchHolder := 2 in
ND_FiBwBranchHolder := 2 in
S_FiTrunkMin := 3 cm  # Minimum vertical spacing between trunk line pipes going through the filter wall for concrete construction
S_FiManAssembly := 1 cm
# Space between the ends of the branch receiver pipes and the walls so that the manifold assemblies are easy to lower into the filter boxes (if the branch receivers extended the entire length of the box they would just barely fit and it would be hard to get into place.
L_FiManFerncoCoupling := 4 cm
# Sand Properties
D_FiSandES := 0.5 mm
Pi_UCFiSand := 1.65
D_FiSand60 := D_FiSandES*Pi_UCFiSand = 0.825 mm
ε_FiSand := 0.4  # Porosity in a sand bed
Rho_FiSand := 2650*kg/m^3
Pi_FiFluidized := 1.3  # Bed expands 30% when fluidized
k_Kozeny := 5  # Carman-Kozeny coefficient
# Material Constants - Wall thickness
T_PlantWall := 15 cm
T_PltWall := T_PlantWall  # Create specific variables for each wall thickness so that after the structural analysis is done we can update the variables here.
T_EtWall := T_PlantWall
T_ChannelWall := 15 cm
T_LfomChannelWall := T_ChannelWall
T_Floor := 20 cm
# Drill Series
D_DrillEng :=
    i ← 0
    D_DrillEng[0] ← 1/32*in
    while D_DrillEng[i] ≤ 3/16*in - 1/128*in
        i ← i + 1
        D_DrillEng[i] ← D_DrillEng[i - 1] + 1/128*in
    while D_DrillEng[i] < 1 in - 1/16*in
        i ← i + 1
        D_DrillEng[i] ← D_DrillEng[i - 1] + 1/16*in
    while D_DrillEng[i] < 2 in
        i ← i + 1
        D_DrillEng[i] ← D_DrillEng[i - 1] + 1/4*in
    return D_DrillEng
D_DrillMet :=
    i ← 0
    D_DrillMet[0] ← 0.5 mm
    while D_DrillMet[i] ≤ 5 mm - 0.1 mm
        i ← i + 1
        D_DrillMet[i] ← D_DrillMet[i - 1] + 0.1 mm
    while D_DrillMet[i] < 20 mm
        i ← i + 1
        D_DrillMet[i] ← D_DrillMet[i - 1] + 1 mm
    while D_DrillMet[i] < 50 mm
        i ← i + 1
        D_DrillMet[i] ← D_DrillMet[i - 1] + 2 mm
    return D_DrillMet
D_Drill :=
    D_Drill ← D_DrillEng if EN_DrillSeries == 0
    D_Drill ← D_DrillMet otherwise
