# [reference: BasicInputs.xmcd]
# [reference: ExpertInputs.xmcd]
# [reference: MathFunctions.xmcd]
# [reference: PipeDatabase.xmcd]
# [reference: FluidsFunctions.xmcd]
# [reference: SedimentationTank.xmcd]
# [reference: Flocculator.xmcd]
# [reference: LFOM.xmcd]
# [reference: LinearCdc.xmcd]
# [reference: ChemStorageTanks.xmcd]
# [reference: EntranceTank.xmcd]
# [reference: StackedRapidSandFilter.xmcd]
# AutoCAD drawing programs:
# Translators:
# These are the codes that take MathCAD outputs and create AutoCAD scripts that are used to draw the plant (formerly Basics)
# [reference: MtoATranslators.xmcd]
# The wrapped MtoA translator contains the functions that the user will want to access. These functions will draw pieces with full functionality - specifying the location, dimension, and orientation of the object. Also, it contains layer control and subtraction capabilities for grouped objects.
# [reference: MtoATranslatorsWrapped.xmcd]
# Plant Elements:
# These are all of the files that draw the fundamental parts of the plants (tees, elbows, tanks, pipes, etc)
# [reference: ChannelF.xmcd]
# [reference: PlumbingF.xmcd]
# [reference: TankF.xmcd]
# [reference: StairsF.xmcd]
# [reference: DrainChannelF.xmcd]
# Specific Pieces:
# These are the codes that draw the bigger pieces of the plant (the sed tank, floc tank, etc)
# [reference: FlocculatorAC.xmcd]
# [reference: SedimentationTankAC.xmcd]
# [reference: EntranceTankAC.xmcd]
# [reference: ChemStockTanksAC.xmcd]
# [reference: CdcAC.xmcd]
# [reference: OperatorAccessAC.xmcd]
Lances(PipeLengthArray) :=
    n ← 0
    k ← 0
    i ← 0
    while i < last(PipeLengthArray)
        iteration ← 0
        length ← 0 m
        while (length ≤ 5.5 m and iteration < (last(PipeLengthArray) - i))
            ((arraytoolong[k] ← PipeLengthArray[i] and (k ← k + 1)) and (i ← i + 1)) if PipeLengthArray[i] > 5.5 m
            ((length ← length + PipeLengthArray[i]) and (i ← i + 1) and (iteration ← 0)) if (length + PipeLengthArray[i]) ≤ 5.5 m
            ((PipeLengthArray[i + iteration] ← PipeLengthArray[i + iteration + 1]) and (PipeLengthArray[i + iteration + 1] ← PipeLengthArray[i + iteration]) and (iteration ← iteration + 1)) otherwise
        n ← n + 1
    return [n; arraytoolong]
PipeLengthArray2 := [5.6; 2; 4; 3]*m
LookupFloor(search, arrayin, arrayout) :=
    i ← 0
    while (search > arrayin[i] and i < last(arrayin))
        i ← i + 1
    return arrayout[i - 1]
PipeLengthArray := [3; 2.5; 3; 1.2; 4.4; 5; 6.3; 1.4; 3.4; 4.3; 2.3; .2; .4; 1.4; 1.6]*m
Lances(PipeLengthArray2) = [2; [0; 1]]
Lances(PipeLengthArray) = [7; [0; 1]]
last(PipeLengthArray) = 14
# Entrance Tank
# Entrance Tank Concrete
A_EtWalls := 2*(H_Et*(L_Et + (2*T_EtWall))) + 2*(H_Et*W_Et) = 12.2685 m^2
A_EtFloor := (W_Et + 2*T_EtWall)*(L_Et + 2*T_EtWall) = 7.53399 m^2  # Surface area of Tank floor
Vol_EtWalls := A_EtWalls*T_EtWall = 1.84027 m^3
Vol_EtFloor := A_EtFloor*T_EtWall = 1.1301 m^3
Vol_Et := Vol_EtFloor + Vol_EtWalls = 2.97037 m^3  # Volume of concrete needed to build Entrance Tank
# Volume for the hoppers
W_EtDrainFloor := OuterDiameterFittingPVC(ND_EtDrain) + 2*S_Fitting
W_HopperBottom := W_Et - W_EtDrainFloor = 0.637363 m
L_HopperBetweenBottom := L_EtHopper - OuterDiameterFittingPVC(ND_EtDrain) - 2*S_Fitting + T_EtHopperLedge
L_HopperSlopeBottom := 0.5*(L_EtHopper - OuterDiameterFittingPVC(ND_EtDrain) - 2*S_Fitting)
Vol_HoppersBetween := N_EtFullHopper*(W_EtDrainFloor*(0.5*H_EtHopper*(L_HopperBetweenBottom + T_EtHopperLedge)) + 1/3*(L_HopperSlopeBottom*H_EtHopper*W_HopperBottom) + 0.5*T_EtHopperLedge*(H_EtHopper*W_HopperBottom)) = 0.616237 m^3
Vol_HoppersAgainstEtWall := L_Et*(0.5*W_HopperBottom*H_EtHopperBack) = 1.05244 m^3
Vol_LastHopper := 0.5*L_HopperSlopeBottom*H_EtLastSlope*W_EtDrainFloor + 1/3*(0.5*L_HopperSlopeBottom*H_EtLastSlope*(W_HopperBottom - tan(AN_EtSlope)*(H_EtHopper - H_EtLastSlope))) = 0.0293383 m^3
Vol_Hoppers := Vol_HoppersBetween + Vol_HoppersAgainstEtWall + Vol_LastHopper = 1.69801 m^3
Vol_HoppersAgainstEtWallOld := 3*(L_EtHopper*W_HopperBottom^2*sqrt(3)/2 - W_HopperBottom^2*sqrt(3)*(L_EtHopper - OuterDiameterFittingPVC(ND_EtDrain) - 2*S_Fitting)/3) = 0.580745 m^3
Vol_HoppersBetweenOld := N_EtFullHopper*(3*W_Et*H_EtHopper^2*1/sqrt(3) + H_EtHopper*T_EtHopperLedge*W_Et) = 1.85299 m^3
Vol_EtSlopeFullOld := ((L_EtHopper - S_Fitting - ConRadius(ND_EtDrain))*W_Et*H_EtHopper + H_EtHopperBack*L_EtHopper*(W_Et - 2*(S_Fitting + ConRadius(ND_EtDrain)))*0.5 - 0.5*H_EtHopperBack*(L_EtHopper - 2*(S_Fitting + ConRadius(ND_EtDrain)))*(W_Et - 2*(S_Fitting + ConRadius(ND_EtDrain))))
Vol_EtHalfSlopeLastOld := 0.25*L_EtHopper*H_EtHopperBack*(W_Et - 2*(S_Fitting + ConRadius(ND_EtDrain))) + 0.5*H_EtLastSlope*W_Et*(L_EtHopper - S_Fitting - ConRadius(ND_EtDrain)) - □  # error: This placeholder is empty.
# Entrance Tank Pipes and Fittings
# Rapid Mix Pipe, LFOM, and Orifice Plate
ND_RMPipe = 0.3048 m
L_RMPipeVert = 1.80071 m
L_RMPipeHoriz = 1.33771 m
L_RMPipes := L_RMPipeVert + L_RMPipeHoriz = 3.13842 m
N_RMElbow := 1
ND_RMAirRelease = 0.0254 m
L_RMAirRelease = 1.67423 m
# Hopper Drains
ND_EtDrain = 0.0762 m
L_EtDrainStopper := H_Et - H_PlantFreeboard/2 + SocketDepth(ND_EtDrain)
N_EtDrains := N_EtFullHopper + 1 = 5
N_EtDrainCouplings := N_EtDrains = 5
N_EtDrainStoppers := N_EtDrains = 5
L_EtDrainStopper = 0.818975 m
L_EtDrainStoppersTotal := N_EtDrainStoppers*L_EtDrainStopper = 4.09488 m
N_EtDrainPipes := N_EtDrains
L_EtDrainPipe := T_PlantWall = 0.15 m
L_EtDrainPipesTotal := N_EtDrainPipes*L_EtDrainPipe = 0.75 m
# Overflow Drain
ND_EtOverflowDrain = 0.2032 m
N_OverflowDrainCaps := 2
N_OverflowDrainTees := 1
N_OverflowDrainElbows := 1
L_EtChannelPipes = 0.175756 m
L_EtOverflowPipeVert = 0.458167 m
L_OverflowDrainPipes := 2*L_EtChannelPipes + L_EtOverflowPipeVert = 0.80968 m
# Flow Control Drain
L_EtFlowControlHoriz3 := 2*SocketDepth(ND_EtFlowControl) + 2*MaleAdapterLength(ND_EtFlowControl) + ValveLength(ND_EtFlowControl) - 2*ValveSocket(ND_EtFlowControl)
ND_EtFlowControl = 0.1524 m
N_EtFlowControlCouplings := 2
N_EtFlowControlElbows := 2
N_EtFlowControlMaleAdapters := 2
N_EtFlowControlGateValves := 1
L_EtFlowControlPipes :=
    2*SocketDepth(ND_EtFlowControl) + L_EtFlowControlVert + L_EtFlowControlHoriz3 if L_EtFlowControlHoriz ≤ SocketDepth(ND_EtFlowControl)
    2*SocketDepth(ND_EtFlowControl) + L_EtFlowControlVert + 2*L_EtFlowControlHoriz + L_EtFlowControlHoriz3 otherwise
    = 0.804702 m
# Inlet Pipe
# Pipe length arbitrary, so not included
ND_EtInlet = 0.2032 m
# Chemical Dosing Components
# Stock Tank Dimensions
H_CoagTank = 1.39 m
H_FilterCoagTank = 0.8509 m
H_ChlorineTank = 0.8509 m
R_CoagTank = 0.55 m
R_FilterCoagTank = 0.28575 m
R_ChlorineTank = 0.28575 m
# Dosing and Draining Plumbing
ND_CoagPiping = 0.0127 m
N_ChemBallValves := 6
N_ChemBulkheadFittings := 12
N_ChemMaleInserts := 12
N_ChemElbowsEst := 20
# Estimated instead of calculated since the lengths and configuration of the plumbing is subject to discretion.
N_ChemTeesEst := 10
L_ChemPipesEst := 10*L_EtChemPlatform = 28.73 m
# [reference: StackedRapidSandFilterAC.xmcd]
# Flocculator
# Flocculator Concrete
A_FlocSlab := (|TotalFloc_Dim[0]| + 2*T_PlantWall)*(|TotalFloc_Dim[1]| + 2*T_PlantWall) = 19.249 m^2
Vol_FlocSlab := A_FlocSlab*T_PlantWall = 2.88735 m^3
A_FlocWalls := 2*(|TotalFloc_Dim[1]| + 2*T_PlantWall)*|TotalFloc_Dim[2]| + (N_FlocChannels + 1)*|TotalFloc_Dim[0]|*H_Floc = 75.7179 m^2
Vol_FlocWalls := A_FlocWalls*T_PlantWall = 11.3577 m^3
Vol_FlocTotal := Vol_FlocSlab + Vol_FlocWalls = 14.245 m^3
# Flocculator Baffles
W_FlocBaffle = 0.54 m
L_BafflesTotal :=
    TotalLength ← 0 m
    for i ∈ 0 .. N_FlocChannels - 1
        for j ∈ 0 .. N_FlocChannelBaffles[i] - 1
            TotalLength ← TotalLength + L_FlocBaffles[j, i]
    return TotalLength
    = 48.1863 m
L_FlocBaffleLower = 1.06177 m
# L.FlocBaffleLower is only relevant for vertical flocculators; horizontal flocculators will all have a length of L.FlocBaffleLower
L_FlocBaffleUpper = 1.18828 m  # Should the number of baffles of each length be calculated as well?
A_BafflesTotal := L_BafflesTotal*W_FlocBaffle = 26.0206 m^2
# Flocculator Modules
ND_FlocModulesMain = 0.0127 m
L_FlocModPipesEst := 4*N_FlocChannels*|TotalFloc_Dim[0]| = 101.036 m
N_BeginningModuleCaps := □  # error: This placeholder is empty.
N_BeginningModuleCouplings := □  # error: This placeholder is empty.
N_BeginningModulePipes := □  # error: This placeholder is empty.
ND_FlocModulesLarge = 0.0381 m
ND_SpacerPipe = 0.01905 m
# Sedimentation Tank
W_SedTotal := W_Sed*N_SedTanks + (N_SedTanks + 1)*T_PlantWall = 7.0008 m
A_Walls := 2*H_Sed*W_SedChannel + ((W_SedInletChannel + W_SedExitChannel + 3*T_SedWeir)*L_SedChannel) + (H_SedInletChannel*L_SedChannel) + (L_Sed*H_Sed*(N_SedTanks + 1))
A_ChannelsFloor := W_SedTotal*(W_SedInletChannel + W_SedExitChannel + W_SedWeirInlet + W_SedInletChannelPostWeir)
Vol_ChannelsFloor := A_ChannelsFloor*T_ChannelWall = 8.26274 m^3
A_ChannelWalls := L_SedChannel*(H_SedInletChannel + T_ChannelWall) = 4.30259 m^2
W_SedInletChannel + W_SedExitChannel = 1.01757 m
L_SedChannel = 6.7008 m
W_SedBay*N_SedBays*N_SedTanks + (N_SedBays*N_SedTanks + 1)*T_PlantWall = 7.4508 m
6.37 m - 5.09 m - 2*T_PlantWall = 0.98 m
L_InletTank := S_Elbow + ElbowRadius(ND_PltWeir) + ConRadius(ND_PltWeir) + SocketDepth(ND_PltWeir)
W_InletTank := ((2*ConRadius(ND_PltWeir)) + (2*S_Elbow))
Vol_InletTankWalls := (((L_InletTank + 2*T_ChannelWall)*(W_InletTank + 2*T_ChannelWall)) - (L_InletTank*W_InletTank) - ((L_InletTank - T_ChannelWall)*T_ChannelWall))*H_InletChannel
A_InletTankFloor := (W_InletTank + 2*T_ChannelWall)*(L_InletTank + 2*T_ChannelWall)
Vol_InletTankFloor := A_InletTankFloor*T_ChannelWall
Vol_InletChannelTank := Vol_InletTankFloor + Vol_InletTankWalls
L_ExitTank := S_Elbow + ElbowRadius(ND_PltWeir) + ConRadius(ND_PltWeir) + SocketDepth(ND_PltWeir)
W_ExitTank := 4*ConRadius(ND_PltWeir) + 3*S_Elbow
A_ExitTankWalls := (L_ExitTank*T_ChannelWall) + 2*((W_ExitTank + 2*T_ChannelWall)*T_ChannelWall)
# **Area and Volume of the walls are only for the INSIDE wall; the outside wall is already included in the area and volume of the sed walls.**
Vol_ExitTankWalls := A_ExitTankWalls*H_ExitChannel  # L_SedHopper
A_ExitTankFloor := (L_ExitTank + 2*T_ChannelWall)*(W_ExitTank + 2*T_ChannelWall)
Vol_ExitTankFloor := A_ExitTankFloor*T_ChannelWall
Z_SedHopperBackSlope = 0.933921 m
# Sed Tank Slopes
A_SedSlope := H_SedSideSlopes*W_SedSideSlopes/2 = 0.16427 m^2  # **Cross Sectional Area of One Slope**
A_SedSlopes := A_SedSlope*N_SedBays*N_SedTanks = 0.985618 m^2
Vol_SedSlopes := A_SedSlopes*L_Sed = 6.22396 m^3
# Floc Hopper
A_FlocHopperSlope := H_SedSideSlopes*W_SedSideSlopes/2 = 0.16427 m^2
P_FlocChannelMin =  # error: This variable is undefined.
P_FlocChannelVPlastic =  # error
# Pipes and Valves of Sed Tank
N_PipeSedPlateFrame := W_Sed/B_SedPipe - 1 + L_Sed/B_SedPipe - 1
# Length of pipe needed for Sedimentation Tank Plate Frame at ND.SedPlateFrame
L_PipeSedPlateFrameTotal := N_SedTanks*((W_Sed/B_SedPipe - 1)*L_Sed + (L_Sed/B_SedPipe - 1)*W_Sed)
L_Weir := 2*H_PltWeir  # Total length of Weir pipe in Inlet and Exit Channel Tanks at ND.PltWeir
L_SedLaunder = 5.09052 m
# Number of couplings for launder pipe going through concrete wall
N_SedValves := N_SedBays*N_SedTanks = 6
N_SedValveCouplings := N_SedValves = 6
# Lamella and Modules
N_SedPlatesTotal =  # error
T_SedPlate = 0.002 m
L_SedPlate = 0.6 m
N_SedModulePlates - 1 = 4
L_SedPlateTotal := N_SedPlatesTotal*L_SedPlate
ND_SedModulePipe = 0.0127 m
N_SedModuleCaps := 2*4*N_SedModulePlates*N_SedBays*N_SedTanks = 240
N_SedModulePipes := 4*N_SedModules*N_SedBays*N_SedTanks = 768
L_SedModulePipes := B_SedPlate*(N_SedModulePlates - 1) + T_SedPlate + 2*(CapHeight(ND_SedModulePipe) - ConRadius(ND_SedModulePipe) + outerradius(ND_SedModulePipe)) = 0.155942 m
N_SedModuleSpacers := 4*(N_SedModulePlates - 1)*N_SedModules*N_SedBays*N_SedTanks = 3072
L_SedModuleSpacers := B_SedPlate - T_SedPlate = 0.025 m
# Filter
# Filter Bed Concrete
A_FiBedSlab := (L_Fi + 2*T_FiWall)*(N_Fi*W_Fi + (N_Fi + 1)*T_FiWall) = 6.13303 m^2
Vol_FiBedSlab := T_FiWall*A_FiBedSlab = 1.53326 m^3  # need to subtract out the subtractions for the backwash trunk lines
A_FiWall := ((N_Fi + 1)*T_FiWall + N_Fi*W_Fi)*(L_Fi + 2*T_FiWall) - N_Fi*W_Fi*L_Fi = 2.74969 m^2
Vol_FiWalls := A_FiWall*H_Fi = 12.3672 m^3
# Filter Sand
H_FiSand = 1.27083 m
Vol_FiSandTotal := H_FiSand*W_Fi*L_Fi*N_Fi = 4.29965 m^3
# Filter Auxiliary Box and Inlet Channel Concrete
A_FiAuxBoxSlab := |FiAuxSubBox_Dim[0]|*|FiAuxSubBox_Dim[1]| = 6.13705 m^2
Vol_FiAuxBoxSlab := A_FiAuxBoxSlab*T_PlantWall = 0.920558 m^3
A_FiInletChannelSlab := (W_FiInletChannel + T_PlantWall)*(L_FiInletChannel + 2*T_PlantWall) = 1.45287 m^2
Vol_FiInletChannelSlab := A_FiInletChannelSlab*T_PlantWall = 0.21793 m^3
A_FiAuxBoxWalls := 2*||FiAuxSubBox_Dim[0]|*FiAuxSubBox_Dim[2]| = 0.760337 m^2
Vol_FiAuxBoxWalls := A_FiAuxBoxWalls*T_PlantWall = 0.114051 m^3
A_ExitBoxAndDistWalls := 2*(N_Fi*(W_FiEntrance + T_PlantWall) + (N_Fi - (N_Fi > 1))*(W_FiOverflow + T_PlantWall) - T_PlantWall)*FiExitBox_dim[2] = 6.62517 m^2
Vol_ExitBoxAndDistWalls := A_ExitBoxAndDistWalls*T_PlantWall = 0.993776 m^3
A_FiEntWeirWall := (Z_FiTop - Z_FiEntranceWeir)*W_FiEntrance*N_Fi = 0.311157 m^2
Vol_FiEntWeirWall := A_FiEntWeirWall*T_PlantWall = 0.0466736 m^3
A_FiOverflowBoxBase := FiOverflowBox_Dim[0]*FiOverflowBox_Dim[1]*ceil(N_Fi/2) = 0.361792 m^2
Vol_FiOverflowBoxBase := A_FiOverflowBoxBase*|(FiEntranceBox_origin[2] - FiOverflowBox_Origin[2])| = 0.269384 m^3
A_FiOverflowWeir := L_FiOverflowWeir*(Z_FiTop - Z_FiOverflowWeir)*N_Fi = 0.263793 m^2
Vol_FiOverflowWeir := A_FiOverflowWeir*T_PlantWall = 0.039569 m^3
A_OverflowWeirWall := (FiOverflowBox_Dim[1] + T_PlantWall)*(Z_FiTop - FiEntranceBox_origin[2] - T_PlantWall) = 0.536874 m^2
Vol_OverflowWeirWall := A_OverflowWeirWall*T_PlantWall = 0.0805311 m^3
# Inlet Channel Plumbing
N_FiEntrancePipes = 2
ND_FiEntrancePipe = 0.2032 m
L_FiInletPipe = 1.00445 m
N_FiInletCouplings := N_FiEntrancePipes = 2
ND_FiInletCouplings := ND_FiEntrancePipe = 0.2032 m
# Backwash Trunk Line Pipes and Fittings
N_FiBwTrunk := N_Fi = 2  # All the following lengths of pipes, number of couplings, etc. need to be multiplied by this number
ND_FiBwTrunk = 0.2032 m
L_FiBwTrunkThroughWall := L_FiManFerncoCoupling/2 + T_FiWall + SocketDepth(ND_FiBwTrunk) = 0.334 m
L_FiInPipe0 := N_Fi*(L_FiInPipe0a + L_FiInPipe0b + L_FiBwTrunkThroughWall) = 10.5919 m
N_BackwashCouplings := 2*N_Fi = 4
N_BackwashTees := 1*N_Fi = 2
# Backwash Manifold Branches
N_FiBwManBranch := 20*N_Fi = 40
ND_FiBwManBranch = 0.0381 m
L_FiBwManBranch = 0.606662 m
L_FiBwManBranchTotal := N_FiBwManBranch*L_FiBwManBranch = 24.2665 m
# Manifold Branch Receivers
N_FiBwBranchHolders := 2*N_Fi = 4
ND_FiBwBranchHolder = 0.0762 m
L_FiBwBranchHolder = 1.04969 m
N_FiBwBranchCaps := 2*N_FiBwBranchHolders = 8
# Siphon Pipes and Fittings
N_FiSiphon := N_Fi = 2
ND_FiSiphon = 0.2032 m
N_SiphonManifoldCaps := 2
N_FiSiphonTees := 2
N_FiSiphonCouplings := 2
N_FiSiphonElbows := 3
N_FiSiphonManifold := 2
L_FiSiphonManifold = 0.354665 m
L_FiSiphonPipe1a = 0.11945 m
L_FiSiphonPipe1b = 0.211396 m
L_FiSiphonPipe2 = 1.37693 m
L_FiSiphonPipe3 = 0.128 m
L_FiSiphonPipe4 = 3.11947 m
L_FiSiphonChannelPipe1 = 1.29047 m
L_FiSiphonChannelStub = 0.275264 m
L_FiSiphonPipes := N_Fi*(N_FiSiphonManifold*L_FiSiphonManifold + L_FiSiphonPipe1a + L_FiSiphonPipe1b + L_FiSiphonPipe2 + L_FiSiphonPipe3 + L_FiSiphonPipe4 + L_FiSiphonPipeBottom + L_FiSiphonChannelPipe1 + L_FiSiphonChannelStub) = 20.1595 m
# Inlet and Exit Plumbing
N_Fi = 2  # All the following numbers will simply be multiplied by the number of filters
ND_FiTrunk = 0.1524 m
# Between the entrance/exit boxes and the filter
N_TrunkElbows := 11  # total for all trunk lines (except for backwash)
N_TrunkCouplings := 2*N_FiLayer  # out of the entrance box and into exit box and into/out of the filter
L_Inlet1Pipes := L_FiInPipe1a + L_FiInPipe1b = 4.2338 m
L_Inlet2Pipes := L_FiInPipe2a + L_FiInPipe2b + L_FiInPipe2c + L_FiInPipe2d = 3.77714 m
L_Inlet3Pipes := L_FiInPipe3a + L_FiInPipe3b + L_FiInPipe3c + L_FiInPipe3d = 3.0906 m
L_Outlet0Pipes := L_FiOutPipe0a + L_FiOutPipe0b = 3.59965 m
L_Outlet1Pipes := L_FiOutPipe1a + L_FiOutPipe1b = 2.9438 m
L_Outlet3Pipes := L_FiOut3PipeZ + L_FiOut3PipeX + L_FiOut3PipeY = 4.52137 m
L_Stubs := 3*L_FiEntPipeStub + 3*L_FiExitPipeStub = 2.57715 m
# Manifold Trunks
N_FiTrunkCaps := 12
L_FiTrunkTotal := N_FiLayer*L_FiTrunk
L_TrunkLines := L_Inlet1Pipes + L_Inlet2Pipes + L_Inlet3Pipes + L_Outlet0Pipes + L_Outlet1Pipes + L_Outlet3Pipes + L_Stubs + L_FiTrunkTotal = 31.0103 m
# Manifold Branches
N_FiManBranchTotal = 200
ND_FiManBranch = 0.0254 m
L_FiManBranch = 0.64635 m
L_FiManBranchTotal := N_FiManBranchTotal*L_FiManBranch
# Manifold Branch Receivers
N_FiBranchHolders := 2*N_FiLayer = 12
ND_FiBranchHolder = 0.0508 m
N_FiBranchCaps := 2*N_FiBranchHolders = 24
# Exit Box Drain
N_Fi = 2
ND_FiExitWaste = 0.1016 m
N_ExitBoxDrainCouplings := 2
N_ExitBoxDrainElbows := 1
L_ExitBoxDrainPipes := L_FiOutPipe2a + L_FiExitDrainPipeHoriz + L_ExitBoxDrainStub
# Sand Drain Plumbing
N_Fi = 2
ND_FiSandOutlet = 0.0508 m
L_FiSandDrainPipes := L_FiSandDrainPipeVert + L_FiSandDrainPipeAngled
N_SandDrainCaps := 1
N_SandDrainValves := 1
# Distribution Plumbing
# This definitely needs to be checked -- not sure how distribution plumbing will be arrayed with higher numbers of filters.
ND_DistPipe = 0.2032 m
N_DistPlumb := 1 + floor(N_Fi/2)
N_DistCouplings := 2
N_DistTee :=
    0 if N_Fi ≤ 2
    1 otherwise
N_DistElbows := 2
L_DistPipes :=
    (L_FiDistPipe1 + L_FiDistPipe2 + L_FiDistPipe3) if N_Fi ≤ 2
    ((L_FiDistPipe1 + L_FiDistPipe2 + L_FiDistPipe3 + L_FiDistPipe4 + L_FiDistPipe5)*N_Fi) otherwise
# Plant Floor and Chemical Platform
A_ChemPlatform := L_EtChemPlatform*W_EtChemPlatform = 7.67091 m^2
Vol_ChemPlatform := A_ChemPlatform*T_PlantWall = 1.15064 m^3
A_MainFloor := |Floor_Dim[0]*Floor_Dim[1]|
# does not include subtractions, can be used to calculate the roof area, etc.
# Also, can be used to calculate all the concrete needed for plant floor + floor of all the unit processes
# Drain Channels
# Entrance Tank Drain Channel
A_EntranceTankDC := L_EtDC*W_EtDC = 1.52916 m^2
Vol_EntranceTankDC := A_EntranceTankDC*T_PlantWall = 0.229374 m^3
# Plant Drain Channel (drawn in SRSFAC)
A_PlantDC :=
    (L_PlantDC*W_PlantDC) if Z_PlantLowerDCBottom > Z_PlantUpperDCBottom - Slope_PlantDC*L_PlantUpperDC - 10 cm
    (L_PlantLowerDC*W_PlantDC + L_PlantUpperDC*W_PlantDC) otherwise
A_DCWestWallLower := (Z_Walkway - T_Floor - PlantLowerDC_Origin[2])*(PlantLowerDC_Origin[1] + L_PlantLowerDC + T_PlantWall - (Plant_Origin[1] - T_PlantWall)) = 13.2661 m^2
A_DCWestWallUpper := (Z_Walkway - T_Floor - PlantUpperDC_Origin[2])*(Plant_Origin[1] - T_PlantWall + L_PlantDC + T_PlantWall - PlantUpperDC_Origin[1]) = 5.57253 m^2
A_DCEastWallLower := (Z_Walkway - T_Floor - PlantLowerDC_Origin[2])*(PlantLowerDC_Origin[1] + L_PlantLowerDC + T_PlantWall - (Plant_Origin[1] - T_PlantWall)) = 13.2661 m^2
A_DCEastWallUpper := (Z_Walkway - T_Floor - PlantUpperDC_Origin[2])*(Plant_Origin[1] - T_PlantWall + L_PlantDC + T_PlantWall - PlantUpperDC_Origin[1]) = 5.57253 m^2
A_DCNorthWall := (Z_Walkway - T_Floor - PlantUpperDC_Origin[2])*(Plant_Origin[1] - T_PlantWall + L_PlantDC + T_PlantWall - (Plant_Origin[1] - T_PlantWall + L_PlantDC)) = 0.18844 m^2
A_RMRecessWalls := (Z_Walkway - T_Floor - (Z_FlocTank - T_PlantWall))*□  # error: This '(' requires a matching ')'.
A_DCDropoffWall := (PlantUpperDC_Origin[2] - H_PlantDC - Slope_PlantDC*L_PlantUpperDC - PlantLowerDC_Origin[2])*(PlantLowerDC_Origin[1] + L_PlantLowerDC + T_PlantWall - (PlantLowerDC_Origin[1] + L_PlantLowerDC)) = 0.00880419 m^2
A_PlantDCWallsTotal :=
    A_DCWestWallLower + A_DCWestWallUpper + A_DCEastWallLower + A_DCEastWallUpper + A_DCNorthWall + A_RMRecessWalls if Z_PlantLowerDCBottom > Z_PlantUpperDCBottom - Slope_PlantDC*L_PlantUpperDC - 10 cm
    A_DCWestWallLower + A_DCWestWallUpper + A_DCEastWallLower + A_DCEastWallUpper + A_DCNorthWall + A_DCDropoffWall + A_RMRecessWalls otherwise
Vol_PlantDCWalls := A_PlantDCWallsTotal*T_PlantWall
Floc_Origin[1] + N_FlocChannels*(W_FlocChannel + T_PlantWall) - Et_Origin[1] = -1.15 m
Plant_Origin[1] - T_PlantWall = -0.15 m
Vol_PlantDCBottom := A_PlantDC*T_PlantWall = 1.73996 m^3
PlantLowerDC_Origin[1] + L_PlantLowerDC + T_PlantWall = 7.31398 m
Vol_PlantDCWalls := A_PlantDCWalls*T_PlantWall
Vol_PlantDCTotal := Vol_PlantDCBottom + Vol_PlantDCWalls
H_PlantDC = 0.419532 m
Vol_TotalDC := Vol_EntranceTankDC + Vol_PlantDCTotal
