# This file includes both the older code relevant to generating a materials list as well as the code which has incorporated newer aspects of the plant design. Deleting the older code will result in errors in the design specifications document.
# Older Code (left to avoid errors in design specs doc)
# Automated Materials List
# **This is for vertical flocculator; Calculate for horizontal in the future**
# Sedimentation Tank Plates
N_SedPlatesTotal := N_SedPlates*N_SedBays*N_SedTanks  # ***Purple variables are verified***
N_SedPlatesPerSheet := floor(L_SedPlateSheet/L_SedPlate)
N_SedPlateSheets := ceil(N_SedPlatesTotal/N_SedPlatesPerSheet)
# Floc Channel and Tank Walls
A_FlocFloor := (L_Sed + 2*T_PlantWall)*(W_FlocChannel*N_FlocChannels + T_PlantWall*(N_FlocChannels + 1))
A_FlocWalls := ((H_Floc*L_Sed) - (H_FlocPort[N_FlocChannels - 1]*W_FlocPort[N_FlocChannels - 1])) + (L_Sed*H_Floc) + ((N_FlocChannels*W_FlocChannel + ((N_FlocChannels + 1)*T_PlantWall))*H_Floc) + ((N_FlocChannels - 1)*((L_Sed*H_Floc) - (H_FlocPort[0]*W_FlocPort[0])))
Vol_FlocFloor := A_FlocFloor*T_PlantWall
Vol_FlocWalls := A_FlocWalls*T_PlantWall
# Sed Tank Components
A_SedWalls := (N_SedTanks + 1)*(L_Sed*H_Sed - ((H_ExitChannel*W_ExitChannel) + (H_InletChannel*W_InletChannel))) + ((N_SedTanks*W_Sed) + ((T_PlantWall*(N_SedTanks + 1))*2))*H_Sed
Vol_SedWalls := A_SedWalls*T_PlantWall
A_SedFloor := (L_Sed + 2*T_PlantWall)*(N_SedTanks*W_Sed + (N_SedTanks + 1)*T_PlantWall)
Vol_SedFloor := A_SedFloor*T_PlantWall
# Entrance Tank Components
A_EtWalls := 2*(H_Et*(L_Et + (2*T_EtWall))) + 2*(H_Et*W_Et)
A_EtFloor := (W_Et + 2*T_EtWall)*(L_Et + 2*T_EtWall)  # Surface area of Tank floor
Vol_EtWalls := A_EtWalls*T_EtWall
Vol_EtFloor := A_EtFloor*T_EtWall
Vol_EntranceTank := Vol_EtFloor + Vol_EtWalls  # Volume of concrete needed to build Entrance Tank
N_EtDrainStoppers := N_Et.Hoppers
N_EtDrains := N_Et.Hoppers
L_EtWeir =  # error: This variable is undefined.
D_EtWeir =  # error
# Volume for the hoppers
Vol_HoppersBetween := 3*W_Et*H_EtHopper^2*1/sqrt(3) + H_EtHopper*(4*ND_Rebar + T_ConcreteMin)*W_Et
W_HopperBottom := W_Et - OuterDiameterFittingPVC(ND_EtDrain) - 2*S_Fitting
Vol_HoppersAgainstEtWall := 3*(L_EtHopper*W_HopperBottom^2*sqrt(3)/2 - W_HopperBottom^2*sqrt(3)*(L_EtHopper - OuterDiameterFittingPVC(ND_EtDrain) - 2*S_Fitting)/3)
Vol_Hoppers := Vol_HoppersBetween + Vol_HoppersAgainstEtWall
# ***Turquoise variables are intermediate variables***
L_InletTank := S_Elbow + ElbowRadius(ND_PltWeir) + ConRadius(ND_PltWeir) + SocketDepth(ND_PltWeir)
W_InletTank := ((2*ConRadius(ND_PltWeir)) + (2*S_Elbow))
Vol_InletTankWalls := (((L_InletTank + 2*T_ChannelWall)*(W_InletTank + 2*T_ChannelWall)) - (L_InletTank*W_InletTank) - ((L_InletTank - T_ChannelWall)*T_ChannelWall))*H_InletChannel
A_InletTankFloor := (W_InletTank + 2*T_ChannelWall)*(L_InletTank + 2*T_ChannelWall)
Vol_InletTankFloor := A_InletTankFloor*T_ChannelWall
Vol_InletChannelTank := Vol_InletTankFloor + Vol_InletTankWalls
L_ExitTank := S_Elbow + ElbowRadius(ND_PltWeir) + ConRadius(ND_PltWeir) + SocketDepth(ND_PltWeir)
W_ExitTank := 4*ConRadius(ND_PltWeir) + 3*S_Elbow
A_ExitTankWalls := (L_ExitTank*T_ChannelWall) + 2*((W_ExitTank + 2*T_ChannelWall)*T_ChannelWall)
Vol_ExitTankWalls := A_ExitTankWalls*H_ExitChannel
A_ExitTankFloor := (L_ExitTank + 2*T_ChannelWall)*(W_ExitTank + 2*T_ChannelWall)
Vol_ExitTankFloor := A_ExitTankFloor*T_ChannelWall
# Exit and Inlet Channel Components
Vol_ExitChannelTank := Vol_ExitTankFloor + Vol_ExitTankWalls
A_ExitChannelWalls := L_Channel*(H_ExitChannel + T_ChannelWall)
# **Area and Volume of the walls are only for the INSIDE wall; the outside wall is already inlcuded in the area and volume of the sed walls.**
A_ExitChannelFloor := L_Channel*W_ExitChannel
Vol_ExitChannelWalls := A_ExitChannelWalls*T_ChannelWall
Vol_ExitChannelFloor := A_ExitChannelFloor*T_ChannelWall
A_InletChannelWalls := L_Channel*(H_InletChannel + T_ChannelWall)
A_InletChannelFloor := L_Channel*W_InletChannel
Vol_InletChannelWall := A_InletChannelWalls*T_ChannelWall
Vol_InletChannelFloor := A_InletChannelFloor*T_ChannelWall
# Sed Tank Slopes
A_SedSlope := Z_SedSlopes*(W_SedBay - W_SedSludge)/2  # **Cross Sectional Area of One Slope**
A_SedSlopes := A_SedSlope*N_SedBays*N_SedTanks
Vol_SedSlopes := A_SedSlopes*L_Sed
# Ferrous Cement/Plastic Baffles
Vol_DistributionTunnelCovers := T_SedSlopePlate*L_SedSlopeManifold*W_SedSlopePlate*N_SedPorts
A_DistributionTunnelCovers := Vol_DistributionTunnelCovers/T_SedSlopePlate
# If P_FlocChannelMin > P_FlocChannelVPlastic  then use ferrous cement, if not use plastic baffles.
# Logic taken from flow chart in Floc3 code.
Vol_FlocBafflesTotal :=
    (W_FlocChannel*T_FlocBaffle*(L_FlocBaffleLower*ceil(N_FlocChannelBaffles/2) + L_FlocBaffleUpper*floor(N_FlocChannelBaffles/2))) if P_FlocChannelMin > P_FlocChannelVPlastic
    0*m^3 otherwise
Vol_FlocBafflesTotal =  # error
P_FlocChannelMin =  # error
P_FlocChannelVPlastic =  # error
A_FlocBafflesTotal := Vol_FlocBafflesTotal/T_FlocBaffle  # **new variable defined here**
A_FlocBafflesTotal =  # error
# Pipes and Valves of Sed Tank
N_PipeSedPlateFrame := W_Sed/B_SedPipe - 1 + L_Sed/B_SedPipe - 1
L_PipeSedPlateFrameTotal := N_SedTanks*((W_Sed/B_SedPipe - 1)*L_Sed + (L_Sed/B_SedPipe - 1)*W_Sed)
# Length of pipe needed for Sedimentation Tank Plate Frame at ND.SedPlateFrame
L_Weir := 2*H_PltWeir  # Total length of Weir pipe in Inlet and Exit Channel Tanks at ND.PltWeir
L_SedLaunder =  # error
N_Launders := N_SedTanks*N_SedBays*N_SedLaunders
L_LaunderPipeTotal := L_SedLaunder*N_Launders
N_LaunderCouplings := N_Launders  # Number of couplings for launder pipe going through concrete wall
N_Valves := N_SedBays*N_SedTanks
N_ValveCouplings := N_Valves
# Filter Piping and Fittings
# To be completed once the pipes and fittings are drawn.
# Filter Box Floor and Walls
A_FilterWallsTotal := H_Fi*(3*W_Fi + 2*L_Fi)
# Chemical Storage Tanks
L_PVCPipeTotal := L_FirstPipe + L_SecondPipe + L_ThirdPipe + L_FourthPipe + L_FinalPipe
SA_PVCPipeTotal := 2*π*.840*L_PVCPipeTotal  # .840 inches is the actual outer diameter for a 1/2" PVC pipe
SA_CoagTank := 4*π*R_CoagTank^2
# Lances Function and Testing
# In Honduras, PVC is purchased in lances, or 6m lengths. Thus, the most useful information about PVC to be provided in the materials list will be the number of lances of each nominal diameter of PVC. This will require a function that will take an array of pipe lengths of a certain nominal diameter as an input and output the lowest number of lances required. This function cannot simply cycle through the array and add individual lengths since that will not minimize the number of lances. Also, it should be noted that pipe may be purchased in lengths other than 6m in other countries, so it is desirable to also have lance length as an input of the function to allow the materials list to be useful in countries other than Honduras.
Lances(PipeLengthArray) :=
    n ← 0
    k ← 0
    i ← 0
    while i < last(PipeLengthArray)
        iteration ← 0
        length ← 0 m
        while (length ≤ 5.5 m and iteration < (last(PipeLengthArray) - i))
            ((arraytoolong[k] ← PipeLengthArray[i] and (k ← k + 1)) and (i ← i + 1)) if PipeLengthArray[i] > 5.5 m
            ((length ← length + PipeLengthArray[i]) and (i ← i + 1) and (iteration ← 0)) if (length + PipeLengthArray[i]) ≤ 5.5 m
            ((PipeLengthArray[i + iteration] ← PipeLengthArray[i + iteration + 1]) and (PipeLengthArray[i + iteration + 1] ← PipeLengthArray[i + iteration]) and (iteration ← iteration + 1)) otherwise
        n ← n + 1
    return [n; arraytoolong]
PipeLengthArray2 := [5.6; 2; 4; 3]*m
LookupFloor(search, arrayin, arrayout) :=
    i ← 0
    while (search > arrayin[i] and i < last(arrayin))
        i ← i + 1
    return arrayout[i - 1]
PipeLengthArray := [3; 2.5; 3; 1.2; 4.4; 5; 6.3; 1.4; 3.4; 4.3; 2.3; .2; .4; 1.4; 1.6]*m
Lances(PipeLengthArray2) = [2; [0; 1]]
Lances(PipeLengthArray) = [7; [0; 1]]
last(PipeLengthArray) = 14
# Entrance Tank
# Entrance Tank Concrete
A_EtWalls := 2*(H_Et*(L_Et + (2*T_EtWall))) + 2*(H_Et*W_Et)
A_EtFloor := (W_Et + 2*T_EtWall)*(L_Et + 2*T_EtWall)  # Surface area of Tank floor
Vol_EtWalls := A_EtWalls*T_EtWall
Vol_EtFloor := A_EtFloor*T_EtWall
Vol_Et := Vol_EtFloor + Vol_EtWalls  # Volume of concrete needed to build Entrance Tank
# Volume for the hoppers
W_EtDrainFloor := OuterDiameterFittingPVC(ND_EtDrain) + 2*S_Fitting
W_HopperBottom := W_Et - W_EtDrainFloor
L_HopperBetweenBottom := L_EtHopper - OuterDiameterFittingPVC(ND_EtDrain) - 2*S_Fitting + T_EtHopperLedge
L_HopperSlopeBottom := 0.5*(L_EtHopper - OuterDiameterFittingPVC(ND_EtDrain) - 2*S_Fitting)
Vol_HoppersBetween := N_EtFullHopper*(W_EtDrainFloor*(0.5*H_EtHopper*(L_HopperBetweenBottom + T_EtHopperLedge)) + 1/3*(L_HopperSlopeBottom*H_EtHopper*W_HopperBottom) + 0.5*T_EtHopperLedge*(H_EtHopper*W_HopperBottom))
Vol_HoppersAgainstEtWall := L_Et*(0.5*W_HopperBottom*H_EtHopperBack)
Vol_LastHopper := 0.5*L_HopperSlopeBottom*H_EtLastSlope*W_EtDrainFloor + 1/3*(0.5*L_HopperSlopeBottom*H_EtLastSlope*(W_HopperBottom - tan(AN_EtSlope)*(H_EtHopper - H_EtLastSlope)))
Vol_Hoppers := Vol_HoppersBetween + Vol_HoppersAgainstEtWall + Vol_LastHopper
Vol_HoppersAgainstEtWallOld := 3*(L_EtHopper*W_HopperBottom^2*sqrt(3)/2 - W_HopperBottom^2*sqrt(3)*(L_EtHopper - OuterDiameterFittingPVC(ND_EtDrain) - 2*S_Fitting)/3)
Vol_HoppersBetweenOld := N_EtFullHopper*(3*W_Et*H_EtHopper^2*1/sqrt(3) + H_EtHopper*T_EtHopperLedge*W_Et)
Vol_EtSlopeFullOld := ((L_EtHopper - S_Fitting - ConRadius(ND_EtDrain))*W_Et*H_EtHopper + H_EtHopperBack*L_EtHopper*(W_Et - 2*(S_Fitting + ConRadius(ND_EtDrain)))*0.5 - 0.5*H_EtHopperBack*(L_EtHopper - 2*(S_Fitting + ConRadius(ND_EtDrain)))*(W_Et - 2*(S_Fitting + ConRadius(ND_EtDrain))))
Vol_EtHalfSlopeLastOld := 0.25*L_EtHopper*H_EtHopperBack*(W_Et - 2*(S_Fitting + ConRadius(ND_EtDrain))) + 0.5*H_EtLastSlope*W_Et*(L_EtHopper - S_Fitting - ConRadius(ND_EtDrain)) - □  # error: This placeholder is empty.
# Entrance Tank Pipes and Fittings
# Rapid Mix Pipe, LFOM, and Orifice Plate
ND_RMPipe =  # error
L_RMPipeVert =  # error
L_RMPipeHoriz =  # error
L_RMPipes := L_RMPipeVert + L_RMPipeHoriz
N_RMElbow := 1
ND_RMAirRelease =  # error
L_RMAirRelease =  # error
# Hopper Drains
ND_EtDrain =  # error
L_EtDrainStopper := H_Et - H_PlantFreeboard/2 + SocketDepth(ND_EtDrain)
N_EtDrains := N_EtFullHopper + 1
N_EtDrainCouplings := N_EtDrains
N_EtDrainStoppers := N_EtDrains
L_EtDrainStopper =  # error
L_EtDrainStoppersTotal := N_EtDrainStoppers*L_EtDrainStopper
N_EtDrainPipes := N_EtDrains
L_EtDrainPipe := T_PlantWall
L_EtDrainPipesTotal := N_EtDrainPipes*L_EtDrainPipe
# Overflow Drain
ND_EtOverflowDrain =  # error
N_OverflowDrainCaps := 2
N_OverflowDrainTees := 1
N_OverflowDrainElbows := 1
L_EtChannelPipes =  # error
L_EtOverflowPipeVert =  # error
L_OverflowDrainPipes := 2*L_EtChannelPipes + L_EtOverflowPipeVert
# Flow Control Drain
L_EtFlowControlHoriz3 := 2*SocketDepth(ND_EtFlowControl) + 2*MaleAdapterLength(ND_EtFlowControl) + ValveLength(ND_EtFlowControl) - 2*ValveSocket(ND_EtFlowControl)
ND_EtFlowControl =  # error
N_EtFlowControlCouplings := 2
N_EtFlowControlElbows := 2
N_EtFlowControlMaleAdapters := 2
N_EtFlowControlGateValves := 1
L_EtFlowControlPipes :=
    2*SocketDepth(ND_EtFlowControl) + L_EtFlowControlVert + L_EtFlowControlHoriz3 if L_EtFlowControlHoriz ≤ SocketDepth(ND_EtFlowControl)
    2*SocketDepth(ND_EtFlowControl) + L_EtFlowControlVert + 2*L_EtFlowControlHoriz + L_EtFlowControlHoriz3 otherwise
# Inlet Pipe
# Pipe length arbitrary, so not included
ND_EtInlet =  # error
# Chemical Dosing Components
# Stock Tank Dimensions
H_CoagTank =  # error
H_FilterCoagTank =  # error
H_ChlorineTank =  # error
R_CoagTank =  # error
R_FilterCoagTank =  # error
R_ChlorineTank =  # error
# Dosing and Draining Plumbing
ND_CoagPiping =  # error
N_ChemBallValves := 6
N_ChemBulkheadFittings := 12
N_ChemMaleInserts := 12
N_ChemElbowsEst := 20
# Estimated instead of calculated since the lengths and configuration of the plumbing is subject to discretion.
N_ChemTeesEst := 10
L_ChemPipesEst := 10*L_EtChemPlatform
# Flocculator
# Flocculator Concrete
A_FlocSlab := (|TotalFloc_Dim[0]| + 2*T_PlantWall)*(|TotalFloc_Dim[1]| + 2*T_PlantWall)
Vol_FlocSlab := A_FlocSlab*T_PlantWall
A_FlocWalls := 2*(|TotalFloc_Dim[1]| + 2*T_PlantWall)*|TotalFloc_Dim[2]| + (N_FlocChannels + 1)*|TotalFloc_Dim[0]|*H_Floc
Vol_FlocWalls := A_FlocWalls*T_PlantWall
Vol_FlocTotal := Vol_FlocSlab + Vol_FlocWalls
# Flocculator Baffles
W_FlocBaffle =  # error
L_BafflesTotal :=
    TotalLength ← 0 m
    for i ∈ 0 .. N_FlocChannels - 1
        for j ∈ 0 .. N_FlocChannelBaffles[i] - 1
            TotalLength ← TotalLength + L_FlocBaffles[j, i]
    return TotalLength
L_FlocBaffleLower =  # error  # L.FlocBaffleLower is only relevant for vertical flocculators; horizontal flocculators will all have a length of L.FlocBaffleLower
L_FlocBaffleUpper =  # error  # Should the number of baffles of each length be calculated as well?
A_BafflesTotal := L_BafflesTotal*W_FlocBaffle
# Flocculator Modules
ND_FlocModulesMain =  # error
L_FlocModPipesEst := 4*N_FlocChannels*|TotalFloc_Dim[0]|
N_BeginningModuleCaps := □  # error: This placeholder is empty.
N_BeginningModuleCouplings := □  # error: This placeholder is empty.
N_BeginningModulePipes := □  # error: This placeholder is empty.
ND_FlocModulesLarge =  # error
ND_SpacerPipe =  # error
# Sedimentation Tank
W_SedTotal := W_Sed*N_SedTanks + (N_SedTanks + 1)*T_PlantWall
A_Walls := 2*H_Sed*W_SedChannel + ((W_SedInletChannel + W_SedExitChannel + 3*T_SedWeir)*L_SedChannel) + (H_SedInletChannel*L_SedChannel) + (L_Sed*H_Sed*(N_SedTanks + 1))
A_ChannelsFloor := W_SedTotal*(W_SedInletChannel + W_SedExitChannel + W_SedWeirInlet + W_SedInletChannelPostWeir)
Vol_ChannelsFloor := A_ChannelsFloor*T_ChannelWall
A_ChannelWalls := L_SedChannel*(H_SedInletChannel + T_ChannelWall)
W_SedInletChannel + W_SedExitChannel =  # error
L_SedChannel =  # error
W_SedBay*N_SedBays*N_SedTanks + (N_SedBays*N_SedTanks + 1)*T_PlantWall =  # error
6.37 m - 5.09 m - 2*T_PlantWall =  # error
L_InletTank := S_Elbow + ElbowRadius(ND_PltWeir) + ConRadius(ND_PltWeir) + SocketDepth(ND_PltWeir)
W_InletTank := ((2*ConRadius(ND_PltWeir)) + (2*S_Elbow))
Vol_InletTankWalls := (((L_InletTank + 2*T_ChannelWall)*(W_InletTank + 2*T_ChannelWall)) - (L_InletTank*W_InletTank) - ((L_InletTank - T_ChannelWall)*T_ChannelWall))*H_InletChannel
A_InletTankFloor := (W_InletTank + 2*T_ChannelWall)*(L_InletTank + 2*T_ChannelWall)
Vol_InletTankFloor := A_InletTankFloor*T_ChannelWall
Vol_InletChannelTank := Vol_InletTankFloor + Vol_InletTankWalls
L_ExitTank := S_Elbow + ElbowRadius(ND_PltWeir) + ConRadius(ND_PltWeir) + SocketDepth(ND_PltWeir)
W_ExitTank := 4*ConRadius(ND_PltWeir) + 3*S_Elbow
A_ExitTankWalls := (L_ExitTank*T_ChannelWall) + 2*((W_ExitTank + 2*T_ChannelWall)*T_ChannelWall)
# **Area and Volume of the walls are only for the INSIDE wall; the outside wall is already included in the area and volume of the sed walls.**
Vol_ExitTankWalls := A_ExitTankWalls*H_ExitChannel  # L_SedHopper
A_ExitTankFloor := (L_ExitTank + 2*T_ChannelWall)*(W_ExitTank + 2*T_ChannelWall)
Vol_ExitTankFloor := A_ExitTankFloor*T_ChannelWall
Z_SedHopperBackSlope =  # error
# Sed Tank Slopes
A_SedSlope := H_SedSideSlopes*W_SedSideSlopes/2  # **Cross Sectional Area of One Slope**
A_SedSlopes := A_SedSlope*N_SedBays*N_SedTanks
Vol_SedSlopes := A_SedSlopes*L_Sed
# Floc Hopper
A_FlocHopperSlope := H_SedSideSlopes*W_SedSideSlopes/2
P_FlocChannelMin =  # error
P_FlocChannelVPlastic =  # error
# Pipes and Valves of Sed Tank
N_PipeSedPlateFrame := W_Sed/B_SedPipe - 1 + L_Sed/B_SedPipe - 1
# Length of pipe needed for Sedimentation Tank Plate Frame at ND.SedPlateFrame
L_PipeSedPlateFrameTotal := N_SedTanks*((W_Sed/B_SedPipe - 1)*L_Sed + (L_Sed/B_SedPipe - 1)*W_Sed)
L_Weir := 2*H_PltWeir  # Total length of Weir pipe in Inlet and Exit Channel Tanks at ND.PltWeir
L_SedLaunder =  # error
# Number of couplings for launder pipe going through concrete wall
N_SedValves := N_SedBays*N_SedTanks
N_SedValveCouplings := N_SedValves
# Lamella and Modules
N_SedPlatesTotal =  # error
T_SedPlate =  # error
L_SedPlate =  # error
N_SedModulePlates - 1 =  # error
L_SedPlateTotal := N_SedPlatesTotal*L_SedPlate
ND_SedModulePipe =  # error
N_SedModuleCaps := 2*4*N_SedModulePlates*N_SedBays*N_SedTanks
N_SedModulePipes := 4*N_SedModules*N_SedBays*N_SedTanks
L_SedModulePipes := B_SedPlate*(N_SedModulePlates - 1) + T_SedPlate + 2*(CapHeight(ND_SedModulePipe) - ConRadius(ND_SedModulePipe) + outerradius(ND_SedModulePipe))
N_SedModuleSpacers := 4*(N_SedModulePlates - 1)*N_SedModules*N_SedBays*N_SedTanks
L_SedModuleSpacers := B_SedPlate - T_SedPlate
# Filter
# Filter Bed Concrete
A_FiBedSlab := (L_Fi + 2*T_FiWall)*(N_Fi*W_Fi + (N_Fi + 1)*T_FiWall)
Vol_FiBedSlab := T_FiWall*A_FiBedSlab  # need to subtract out the subtractions for the backwash trunk lines
A_FiWall := ((N_Fi + 1)*T_FiWall + N_Fi*W_Fi)*(L_Fi + 2*T_FiWall) - N_Fi*W_Fi*L_Fi
Vol_FiWalls := A_FiWall*H_Fi
# Filter Sand
H_FiSand =  # error
Vol_FiSandTotal := H_FiSand*W_Fi*L_Fi*N_Fi
# Filter Auxiliary Box and Inlet Channel Concrete
A_FiAuxBoxSlab := |FiAuxSubBox_Dim[0]|*|FiAuxSubBox_Dim[1]|
Vol_FiAuxBoxSlab := A_FiAuxBoxSlab*T_PlantWall
A_FiInletChannelSlab := (W_FiInletChannel + T_PlantWall)*(L_FiInletChannel + 2*T_PlantWall)
Vol_FiInletChannelSlab := A_FiInletChannelSlab*T_PlantWall
A_FiAuxBoxWalls := 2*||FiAuxSubBox_Dim[0]|*FiAuxSubBox_Dim[2]|
Vol_FiAuxBoxWalls := A_FiAuxBoxWalls*T_PlantWall
A_ExitBoxAndDistWalls := 2*(N_Fi*(W_FiEntrance + T_PlantWall) + (N_Fi - (N_Fi > 1))*(W_FiOverflow + T_PlantWall) - T_PlantWall)*FiExitBox_dim[2]
Vol_ExitBoxAndDistWalls := A_ExitBoxAndDistWalls*T_PlantWall
A_FiEntWeirWall := (Z_FiTop - Z_FiEntranceWeir)*W_FiEntrance*N_Fi
Vol_FiEntWeirWall := A_FiEntWeirWall*T_PlantWall
A_FiOverflowBoxBase := FiOverflowBox_Dim[0]*FiOverflowBox_Dim[1]*ceil(N_Fi/2)
Vol_FiOverflowBoxBase := A_FiOverflowBoxBase*|(FiEntranceBox_origin[2] - FiOverflowBox_Origin[2])|
A_FiOverflowWeir := L_FiOverflowWeir*(Z_FiTop - Z_FiOverflowWeir)*N_Fi
Vol_FiOverflowWeir := A_FiOverflowWeir*T_PlantWall
A_OverflowWeirWall := (FiOverflowBox_Dim[1] + T_PlantWall)*(Z_FiTop - FiEntranceBox_origin[2] - T_PlantWall)
Vol_OverflowWeirWall := A_OverflowWeirWall*T_PlantWall
# Inlet Channel Plumbing
N_FiEntrancePipes =  # error
ND_FiEntrancePipe =  # error
L_FiInletPipe =  # error
N_FiInletCouplings := N_FiEntrancePipes
ND_FiInletCouplings := ND_FiEntrancePipe
# Backwash Trunk Line Pipes and Fittings
N_FiBwTrunk := N_Fi  # All the following lengths of pipes, number of couplings, etc. need to be multiplied by this number
ND_FiBwTrunk =  # error
L_FiBwTrunkThroughWall := L_FiManFerncoCoupling/2 + T_FiWall + SocketDepth(ND_FiBwTrunk)
L_FiInPipe0 := N_Fi*(L_FiInPipe0a + L_FiInPipe0b + L_FiBwTrunkThroughWall)
N_BackwashCouplings := 2*N_Fi
N_BackwashTees := 1*N_Fi
# Backwash Manifold Branches
N_FiBwManBranch := 20*N_Fi
ND_FiBwManBranch =  # error
L_FiBwManBranch =  # error
L_FiBwManBranchTotal := N_FiBwManBranch*L_FiBwManBranch
# Manifold Branch Receivers
N_FiBwBranchHolders := 2*N_Fi
ND_FiBwBranchHolder =  # error
L_FiBwBranchHolder =  # error
N_FiBwBranchCaps := 2*N_FiBwBranchHolders
# Siphon Pipes and Fittings
N_FiSiphon := N_Fi
ND_FiSiphon =  # error
N_SiphonManifoldCaps := 2
N_FiSiphonTees := 2
N_FiSiphonCouplings := 2
N_FiSiphonElbows := 3
N_FiSiphonManifold := 2
L_FiSiphonManifold =  # error
L_FiSiphonPipe1a =  # error
L_FiSiphonPipe1b =  # error
L_FiSiphonPipe2 =  # error
L_FiSiphonPipe3 =  # error
L_FiSiphonPipe4 =  # error
L_FiSiphonChannelPipe1 =  # error
L_FiSiphonChannelStub =  # error
L_FiSiphonPipes := N_Fi*(N_FiSiphonManifold*L_FiSiphonManifold + L_FiSiphonPipe1a + L_FiSiphonPipe1b + L_FiSiphonPipe2 + L_FiSiphonPipe3 + L_FiSiphonPipe4 + L_FiSiphonPipeBottom + L_FiSiphonChannelPipe1 + L_FiSiphonChannelStub)
# Inlet and Exit Plumbing
N_Fi =  # error  # All the following numbers will simply be multiplied by the number of filters
ND_FiTrunk =  # error
# Between the entrance/exit boxes and the filter
N_TrunkElbows := 11  # total for all trunk lines (except for backwash)
N_TrunkCouplings := 2*N_FiLayer  # out of the entrance box and into exit box and into/out of the filter
L_Inlet1Pipes := L_FiInPipe1a + L_FiInPipe1b
L_Inlet2Pipes := L_FiInPipe2a + L_FiInPipe2b + L_FiInPipe2c + L_FiInPipe2d
L_Inlet3Pipes := L_FiInPipe3a + L_FiInPipe3b + L_FiInPipe3c + L_FiInPipe3d
L_Outlet0Pipes := L_FiOutPipe0a + L_FiOutPipe0b
L_Outlet1Pipes := L_FiOutPipe1a + L_FiOutPipe1b
L_Outlet3Pipes := L_FiOut3PipeZ + L_FiOut3PipeX + L_FiOut3PipeY
L_Stubs := 3*L_FiEntPipeStub + 3*L_FiExitPipeStub
# Manifold Trunks
N_FiTrunkCaps := 12
L_FiTrunkTotal := N_FiLayer*L_FiTrunk
L_TrunkLines := L_Inlet1Pipes + L_Inlet2Pipes + L_Inlet3Pipes + L_Outlet0Pipes + L_Outlet1Pipes + L_Outlet3Pipes + L_Stubs + L_FiTrunkTotal
# Manifold Branches
N_FiManBranchTotal =  # error
ND_FiManBranch =  # error
L_FiManBranch =  # error
L_FiManBranchTotal := N_FiManBranchTotal*L_FiManBranch
# Manifold Branch Receivers
N_FiBranchHolders := 2*N_FiLayer = 12
ND_FiBranchHolder =  # error
N_FiBranchCaps := 2*N_FiBranchHolders = 24
# Exit Box Drain
N_Fi =  # error
ND_FiExitWaste =  # error
N_ExitBoxDrainCouplings := 2
N_ExitBoxDrainElbows := 1
L_ExitBoxDrainPipes := L_FiOutPipe2a + L_FiExitDrainPipeHoriz + L_ExitBoxDrainStub
# Sand Drain Plumbing
N_Fi =  # error
ND_FiSandOutlet =  # error
L_FiSandDrainPipes := L_FiSandDrainPipeVert + L_FiSandDrainPipeAngled
N_SandDrainCaps := 1
N_SandDrainValves := 1
# Distribution Plumbing
# This definitely needs to be checked -- not sure how distribution plumbing will be arrayed with higher numbers of filters.
ND_DistPipe =  # error
N_DistPlumb := 1 + floor(N_Fi/2)
N_DistCouplings := 2
N_DistTee :=
    0 if N_Fi ≤ 2
    1 otherwise
N_DistElbows := 2
L_DistPipes :=
    (L_FiDistPipe1 + L_FiDistPipe2 + L_FiDistPipe3) if N_Fi ≤ 2
    ((L_FiDistPipe1 + L_FiDistPipe2 + L_FiDistPipe3 + L_FiDistPipe4 + L_FiDistPipe5)*N_Fi) otherwise
# Plant Floor and Chemical Platform
A_ChemPlatform := L_EtChemPlatform*W_EtChemPlatform
Vol_ChemPlatform := A_ChemPlatform*T_PlantWall
A_MainFloor := |Floor_Dim[0]*Floor_Dim[1]|
# does not include subtractions, can be used to calculate the roof area, etc.
# Also, can be used to calculate all the concrete needed for plant floor + floor of all the unit processes
# Drain Channels
# Entrance Tank Drain Channel
A_EntranceTankDC := L_EtDC*W_EtDC
Vol_EntranceTankDC := A_EntranceTankDC*T_PlantWall
# Plant Drain Channel (drawn in SRSFAC)
A_PlantDC :=
    (L_PlantDC*W_PlantDC) if Z_PlantLowerDCBottom > Z_PlantUpperDCBottom - Slope_PlantDC*L_PlantUpperDC - 10 cm
    (L_PlantLowerDC*W_PlantDC + L_PlantUpperDC*W_PlantDC) otherwise
A_DCWestWallLower := (Z_Walkway - T_Floor - PlantLowerDC_Origin[2])*(PlantLowerDC_Origin[1] + L_PlantLowerDC + T_PlantWall - (Plant_Origin[1] - T_PlantWall))
A_DCWestWallUpper := (Z_Walkway - T_Floor - PlantUpperDC_Origin[2])*(Plant_Origin[1] - T_PlantWall + L_PlantDC + T_PlantWall - PlantUpperDC_Origin[1])
A_DCEastWallLower := (Z_Walkway - T_Floor - PlantLowerDC_Origin[2])*(PlantLowerDC_Origin[1] + L_PlantLowerDC + T_PlantWall - (Plant_Origin[1] - T_PlantWall))
A_DCEastWallUpper := (Z_Walkway - T_Floor - PlantUpperDC_Origin[2])*(Plant_Origin[1] - T_PlantWall + L_PlantDC + T_PlantWall - PlantUpperDC_Origin[1])
A_DCNorthWall := (Z_Walkway - T_Floor - PlantUpperDC_Origin[2])*(Plant_Origin[1] - T_PlantWall + L_PlantDC + T_PlantWall - (Plant_Origin[1] - T_PlantWall + L_PlantDC))
A_RMRecessWalls := (Z_Walkway - T_Floor - (Z_FlocTank - T_PlantWall))*□  # error: This '(' requires a matching ')'.
A_DCDropoffWall := (PlantUpperDC_Origin[2] - H_PlantDC - Slope_PlantDC*L_PlantUpperDC - PlantLowerDC_Origin[2])*(PlantLowerDC_Origin[1] + L_PlantLowerDC + T_PlantWall - (PlantLowerDC_Origin[1] + L_PlantLowerDC))
A_PlantDCWallsTotal :=
    A_DCWestWallLower + A_DCWestWallUpper + A_DCEastWallLower + A_DCEastWallUpper + A_DCNorthWall + A_RMRecessWalls if Z_PlantLowerDCBottom > Z_PlantUpperDCBottom - Slope_PlantDC*L_PlantUpperDC - 10 cm
    A_DCWestWallLower + A_DCWestWallUpper + A_DCEastWallLower + A_DCEastWallUpper + A_DCNorthWall + A_DCDropoffWall + A_RMRecessWalls otherwise
Vol_PlantDCWalls := A_PlantDCWallsTotal*T_PlantWall
Floc_Origin[1] + N_FlocChannels*(W_FlocChannel + T_PlantWall) - Et_Origin[1] =  # error
Plant_Origin[1] - T_PlantWall =  # error
Vol_PlantDCBottom := A_PlantDC*T_PlantWall
PlantLowerDC_Origin[1] + L_PlantLowerDC + T_PlantWall =  # error
Vol_PlantDCWalls := A_PlantDCWalls*T_PlantWall
Vol_PlantDCTotal := Vol_PlantDCBottom + Vol_PlantDCWalls
H_PlantDC =  # error
Vol_TotalDC := Vol_EntranceTankDC + Vol_PlantDCTotal
