CeilNearest(number, array) :=
    x ← array[0] if number ≤ array[0]
    x ← array[last(array)] if number ≥ array[last(array)]
    otherwise
        i ← 0
        while (number > array[i] and i < last(array))
            i ← i + 1
        x ← array[i]
    return x
# These "nearest" functions will return "number" for the case when the number is less than the smallest value in the array or greater than the largest value in the array
FloorNearest(number, array) :=
    x ← number if number ≤ array[0]
    x ← array[last(array)] if number ≥ array[last(array)]
    otherwise
        i ← 0
        while (number > array[i] and i < last(array))
            i ← i + 1
        x ← array[i - 1]
    return x
RoundNearest(number, array) :=
    x ← array[0] if number ≤ array[0] or number ≥ array[last(array)]
    x ← array[last(array)] if number ≥ array[last(array)]
    otherwise
        i ← 0
        while (number > array[i] and i < last(array))
            i ← i + 1
        x ← array[i] if (number - array[i - 1]) > (array[i] - number)
        x ← array[i - 1] otherwise
    return x
LookupFloor(search, arrayin, arrayout) :=
    ans ← arrayout[last(arrayout)] if search > arrayin[last(arrayin)]
    otherwise
        i ← 0
        while (search > arrayin[i] and i < last(arrayin))
            i ← i + 1
            ans ← arrayout[i - 1]
    return ans
# Returns value in second array corresponding to index in first array that is less than the search value
LookupCeil(search, arrayin, arrayout) :=
    i ← 0
    while (search > arrayin[i] and i < last(arrayin))
        i ← i + 1
    return arrayout[i]
# Returns value in second array corresponding to index in first array that is greater than the search value
LookupRound(search, arrayin, arrayout) :=
    i ← 0
    while (search > arrayin[i] and i < last(arrayin))
        i ← i + 1
    Rounded ← i if (search - arrayin[i - 1]) > (arrayin[i] - search)
    Rounded ← i - 1 otherwise
    return arrayout[Rounded]
# Returns value in second array corresponding to index in first array that is closest to the search value
Specialcase(range, interval) := range/interval - 1
Normalcase(range, interval) := range/interval
rampwithjump(initial, start, interval, range) :=
    ramp[0] ← initial
    end ← Normalcase(range, interval) if start ≥ interval
    end ← Specialcase(range, interval) otherwise
    for i ∈ 1 .. end
        ramp[i] ← start + (i - 1)*interval
    return ramp
ramp(start, interval, range) :=
    for i ∈ 0 .. range/interval - 1
        ramp[i] ← start + i*interval
    return ramp
index(s, array) :=
    i ← 0
    while s > 1.0005*array[i] and i < last(array)
        i ← i + 1
    return i
index2(s, array) :=
    i ← 0
    while s ≠ array[i] and i < last(array)
        i ← i + 1
    return i
NextLargest(value, array) :=
    FinalVal ← array[last(array)] if array[last(array)] ≤ value
    FinalVal ← array[0] otherwise
    i ← 0
    while array[i] < value and i < (rows(array) - 1)
        i ← i + 1
        FinalVal ← array[i]
    FinalVal
ForceRound(x, xarray, direction) :=
    xarray ← sort(xarray)
    i ← 0
    while x > xarray[i]
        i ← i + 1
    return xarray[i - 1 + direction]
# direction is for rounding up (1) or rounding down (0).
ArrayTrunc(array) :=
    N ← 0
    i ← 0
    TruncArray[i] ← array[0] if last(array) == 0
    while N ≠ array[i] and i < last(array)
        N ← array[i]
        TruncArray[i] ← array[i]
        i ← i + 1
    if last(array) > 0
        TruncArray[i] ← array[i] if array[last(array)] ≠ array[last(array) - 1]
    TruncArray
# this function will be used to truncate the arrays when the number of tubes is repeated
