# Calculating Lances:
L_Lance := 6.1 m  # Completed code  # Incomplete code
L_LanceBuffer := 0.60 m  # Completed code, could be improved
L_UseableLance := L_Lance - L_LanceBuffer  # Test code  # Established Inputs
ZeroFunction(i, j) := 0
# The function RemoveInitializingZeroRow (which uses ZeroFunction) will remove the first row in a matrix that contains only zeros and will be used many times in the following functions. This row is usually there because the stack function requires multiple matrices as input even if you have only one, but the local definition arrow ends up creating matrices within matrices.
RemoveInitializingZeroRow(Matrix) :=
    NewMatrix ← matrix(rows(Matrix) - 1, rows(transpose(Matrix)), ZeroFunction)
    for i ∈ 1 .. rows(Matrix) - 1
        for j ∈ 0 .. rows(transpose(Matrix)) - 1
            NewMatrix[:, j][i - 1] ← Matrix[:, j][i]
    return NewMatrix
RemoveZeroLengths(Matrix) :=
    n ← 0
    NoZerosMatrix ← [0, 0, 0, 0]
    for i ∈ 0 .. rows(Matrix) - 1
        if Matrix[:, 0][i] ≠ 0
            NoZerosMatrix ← stack(NoZerosMatrix, transpose(transpose(Matrix)[:, i]))
            n ← n + 1
    return RemoveInitializingZeroRow(NoZerosMatrix)
# RemoveZeroLengths will remove rows in the PipeMatrix with a length of zero (the first column of PipeMatrix corresponds with length), since that means there is technically no pipe to go along with those specifications.
# Length | ND | EN | N
PipeMatrix := [
    2, 5, 5, 6;
    1, 2, 2, 4;
    33, 2, 1, 65;
    1, 3, 2, 5;
    6, 1, 3, 3;
    4, 5, 5, 32;
    3, 2, 8, 65;
    4, 3, 1, 21;
    4, 4, 8, 4;
    6, 4, 6, 35;
    33, 2, 1, 21;
    5, 5, 5, 41;
    5, 1, 1, 2;
    10, 6, 4, 4;
    2, 5, 5, 8;
    2, 5, 5, 9;
    1, 2, 2, 5;
    1, 2, 2, 6;
    3, 5, 5, 7;
    4, 5, 5, 8;
    6, 5, 5, 9;
    5, 2, 2, 2;
    4, 2, 2, 6;
    8, 6, 4, 5;
    4, 6, 4, 6;
    9.5, 6, 4, 5;
    9.5, 6, 4, 5;
    1, 3, 2, 8;
    10, 5, 6, 6;
    4.5, 6, 4, 1
]*m
SortbyLength := csort(PipeMatrix, 0) = [
    1, 2, 2, 4;
    1, 3, 2, 8;
    1, 3, 2, 5;
    1, 2, 2, 5;
    1, 2, 2, 6;
    2, 5, 5, 6;
    2, 5, 5, 8;
    2, 5, 5, 9;
    3, 2, 8, 65;
    3, 5, 5, 7;
    4, 6, 4, 6;
    4, 5, 5, 32;
    4, 2, 2, 6;
    4, 5, 5, 8;
    4, 4, 8, 4;
    4, 3, 1, 21;
    4.5, 6, 4, 1;
    5, 1, 1, 2;
    5, 5, 5, 41;
    5, 2, 2, 2;
    6, 1, 3, 3;
    6, 5, 5, 9;
    6, 4, 6, 35;
    8, 6, 4, 5;
    9.5, 6, 4, 5;
    9.5, 6, 4, 5;
    10, 5, 6, 6;
    10, 6, 4, 4;
    33, 2, 1, 65;
    33, 2, 1, 21
] m
LongPipes(PipeMatrix) :=
    n ← 0
    LongPipesMatrix ← [0, 0, 0, 0]
    for i ∈ 0 .. rows(PipeMatrix) - 1
        if PipeMatrix[:, 0][i] > L_UseableLance
            LongPipesMatrix ← stack(LongPipesMatrix, transpose(transpose(PipeMatrix)[:, i]))
            PipeMatrix[:, 0][i] ← 0
            n ← n + 1
    return [RemoveInitializingZeroRow(LongPipesMatrix); RemoveZeroLengths(PipeMatrix)]
# The function LongPipesMatrix will take the initial PipeMatrix and separate it into two matrices:
# 1) LongPipesMatrix will contain all rows (pipes) that have lengths longer than that of the useable lance.
# 2) ShortPipesMatrix is the remaining rows left in in the original PipeMatrix
TestMatrix := LongPipes(SortbyLength) = [
    [
        6, 1, 3, 3;
        6, 5, 5, 9;
        6, 4, 6, 35;
        8, 6, 4, 5;
        9.5, 6, 4, 5;
        9.5, 6, 4, 5;
        10, 5, 6, 6;
        10, 6, 4, 4;
        33, 2, 1, 65;
        33, 2, 1, 21
    ];
    [
        1, 2, 2, 4;
        1, 3, 2, 8;
        1, 3, 2, 5;
        1, 2, 2, 5;
        1, 2, 2, 6;
        2, 5, 5, 6;
        2, 5, 5, 8;
        2, 5, 5, 9;
        3, 2, 8, 65;
        3, 5, 5, 7;
        4, 6, 4, 6;
        4, 5, 5, 32;
        4, 2, 2, 6;
        4, 5, 5, 8;
        4, 4, 8, 4;
        4, 3, 1, 21;
        4.5, 6, 4, 1;
        5, 1, 1, 2;
        5, 5, 5, 41;
        5, 2, 2, 2
    ]
] m
LongPipesTest := TestMatrix[0] = [
    6, 1, 3, 3;
    6, 5, 5, 9;
    6, 4, 6, 35;
    8, 6, 4, 5;
    9.5, 6, 4, 5;
    9.5, 6, 4, 5;
    10, 5, 6, 6;
    10, 6, 4, 4;
    33, 2, 1, 65;
    33, 2, 1, 21
] m
ShortPipesTest := TestMatrix[1] = [
    1, 2, 2, 4;
    1, 3, 2, 8;
    1, 3, 2, 5;
    1, 2, 2, 5;
    1, 2, 2, 6;
    2, 5, 5, 6;
    2, 5, 5, 8;
    2, 5, 5, 9;
    3, 2, 8, 65;
    3, 5, 5, 7;
    4, 6, 4, 6;
    4, 5, 5, 32;
    4, 2, 2, 6;
    4, 5, 5, 8;
    4, 4, 8, 4;
    4, 3, 1, 21;
    4.5, 6, 4, 1;
    5, 1, 1, 2;
    5, 5, 5, 41;
    5, 2, 2, 2
] m
DivideMatrixND(PipeMatrix) :=
    n ← 0
    TempMatrix ← [0, 0, 0, 0]
    MatrixUse ← csort(PipeMatrix, 1)
    for i ∈ 1 .. rows(MatrixUse) - 1
        if i == 1
            TempMatrix ← stack(TempMatrix, transpose(transpose(MatrixUse)[:, i - 1]))
            TempMatrix ← stack(TempMatrix, transpose(transpose(MatrixUse)[:, i - 1])) if MatrixUse[:, 1][i] == MatrixUse[:, 1][i - 1]
            otherwise
                NDDividedMatrix[n] ← RemoveInitializingZeroRow(TempMatrix)
                n ← n + 1
                TempMatrix ← [0, 0, 0, 0]
                TempMatrix ← stack(TempMatrix, transpose(transpose(MatrixUse)[:, i]))
        if MatrixUse[:, 1][i] == MatrixUse[:, 1][i - 1]
            TempMatrix ← stack(TempMatrix, transpose(transpose(MatrixUse)[:, i]))
            NDDividedMatrix[n] ← RemoveInitializingZeroRow(TempMatrix) if i == rows(MatrixUse) - 1
        otherwise
            NDDividedMatrix[n] ← RemoveInitializingZeroRow(TempMatrix)
            if i ≠ rows(MatrixUse) - 1
                n ← n + 1
                TempMatrix ← [0, 0, 0, 0]
                TempMatrix ← stack(TempMatrix, transpose(transpose(MatrixUse)[:, i]))
    return NDDividedMatrix
# The function DivideMatrixND is the first in a series of functions designed to divide a pipe matrix into individual matrices, each with its own nominal diameter (ND) and enumerated pipe schedule (EN). DivideMatrixND first sorts the pipe matrix by ND (second column) and then splits the matrix into smaller matrices, each with one ND value. Each of these matrices are contained in a cell array in a larger matrix, called NDDividedMatrix from now on.
DividedNDShortPipeMatrix := DivideMatrixND(ShortPipesTest) = [
    [5, 1, 1, 2]; [5, 2, 2, 2; 1, 2, 2, 5; 1, 2, 2, 4; 3, 2, 8, 65; 4, 2, 2, 6; 1, 2, 2, 6]; [1, 3, 2, 5; 4, 3, 1, 21; 1, 3, 2, 8]; [4, 4, 8, 4]; [4, 5, 5, 8; 2, 5, 5, 8; 4, 5, 5, 32; 2, 5, 5, 6; 3, 5, 5, 7; 5, 5, 5, 41; 2, 5, 5, 9]; [4, 6, 4, 6; 4.5, 6, 4, 1]
] m
DividedNDLongPipesMatrix := DivideMatrixND(LongPipesTest) = [
    [6, 1, 3, 3]; [33, 2, 1, 21; 33, 2, 1, 65]; [6, 4, 6, 35]; [10, 5, 6, 6; 6, 5, 5, 9]; [9.5, 6, 4, 5; 9.5, 6, 4, 5; 10, 6, 4, 4; 8, 6, 4, 5]
] m
DividedNDLongPipesMatrix[0] = [6, 1, 3, 3] m
DividedNDShortPipeMatrix[0] = [5, 1, 1, 2] m
DividedNDLongPipesMatrix[1] = [33, 2, 1, 21; 33, 2, 1, 65] m
DividedNDLongPipesMatrix[2] = [6, 4, 6, 35] m
DividedNDShortPipeMatrix[1] = [5, 2, 2, 2; 1, 2, 2, 5; 1, 2, 2, 4; 3, 2, 8, 65; 4, 2, 2, 6; 1, 2, 2, 6] m
DividedNDLongPipesMatrix[3] = [10, 5, 6, 6; 6, 5, 5, 9] m
DividedNDLongPipesMatrix[4] = [9.5, 6, 4, 5; 9.5, 6, 4, 5; 10, 6, 4, 4; 8, 6, 4, 5] m
DividedNDShortPipeMatrix[2] = [1, 3, 2, 5; 4, 3, 1, 21; 1, 3, 2, 8] m
DividedNDShortPipeMatrix[3] = [4, 4, 8, 4] m
DividedNDShortPipeMatrix[4] = [4, 5, 5, 8; 2, 5, 5, 8; 4, 5, 5, 32; 2, 5, 5, 6; 3, 5, 5, 7; 5, 5, 5, 41; 2, 5, 5, 9] m
ENSortMatrix(DividedNDMatrix) :=
    for i ∈ 0 .. rows(DividedNDMatrix) - 1
        TempMatrix ← DividedNDMatrix[i]
        SortedTempMatrix ← csort(TempMatrix, 2)
        SortedDividedNDMatrix[i] ← SortedTempMatrix
    return SortedDividedNDMatrix
# The function ENSortMatrix takes the NDDividedMatrix and sorts each inner matrix by EN (third column) in preparation for the next piece of code, which will divide each of the smaller matrices again, this time by ND.
ENSortedNDPipeMatrix := ENSortMatrix(DividedNDShortPipeMatrix) = [
    [5, 1, 1, 2]; [5, 2, 2, 2; 1, 2, 2, 4; 1, 2, 2, 5; 4, 2, 2, 6; 1, 2, 2, 6; 3, 2, 8, 65]; [4, 3, 1, 21; 1, 3, 2, 8; 1, 3, 2, 5]; [4, 4, 8, 4]; [2, 5, 5, 8; 4, 5, 5, 32; 2, 5, 5, 6; 3, 5, 5, 7; 5, 5, 5, 41; 2, 5, 5, 9; 4, 5, 5, 8]; [4.5, 6, 4, 1; 4, 6, 4, 6]
] m
ENSortedNDLongPipesMatrix := ENSortMatrix(DividedNDLongPipesMatrix) = [
    [6, 1, 3, 3]; [33, 2, 1, 65; 33, 2, 1, 21]; [6, 4, 6, 35]; [6, 5, 5, 9; 10, 5, 6, 6]; [9.5, 6, 4, 5; 10, 6, 4, 4; 8, 6, 4, 5; 9.5, 6, 4, 5]
] m
ENSortedNDPipeMatrix[0] = [5, 1, 1, 2] m
ENSortedNDLongPipesMatrix[0] = [6, 1, 3, 3] m
ENSortedNDLongPipesMatrix[1] = [33, 2, 1, 65; 33, 2, 1, 21] m
ENSortedNDPipeMatrix[1] = [5, 2, 2, 2; 1, 2, 2, 4; 1, 2, 2, 5; 4, 2, 2, 6; 1, 2, 2, 6; 3, 2, 8, 65] m
ENSortedNDLongPipesMatrix[2] = [6, 4, 6, 35] m
ENSortedNDLongPipesMatrix[3] = [6, 5, 5, 9; 10, 5, 6, 6] m
ENSortedNDPipeMatrix[2] = [4, 3, 1, 21; 1, 3, 2, 8; 1, 3, 2, 5] m
ENSortedNDLongPipesMatrix[4] = [9.5, 6, 4, 5; 10, 6, 4, 4; 8, 6, 4, 5; 9.5, 6, 4, 5] m
ENSortedNDPipeMatrix[3] = [4, 4, 8, 4] m
ENSortedNDPipeMatrix[4] = [2, 5, 5, 8; 4, 5, 5, 32; 2, 5, 5, 6; 3, 5, 5, 7; 5, 5, 5, 41; 2, 5, 5, 9; 4, 5, 5, 8] m
DivideMatrixEN(ENSortedNDPipeMatrix) :=
    n ← 0
    for i ∈ 0 .. rows(ENSortedNDPipeMatrix) - 1
        TempMatrix ← [0, 0, 0, 0]
        MatrixUse ← stack(TempMatrix, ENSortedNDPipeMatrix[i])
        for j ∈ 1 .. rows(MatrixUse) - 1
            if j == 1
                TempMatrix ← stack(TempMatrix, transpose(transpose(MatrixUse)[:, j]))
                if j == rows(MatrixUse) - 1
                    ENDividedNDMatrix[n] ← RemoveInitializingZeroRow(TempMatrix)
                    n ← n + 1
            if MatrixUse[:, 2][j] == MatrixUse[:, 2][j - 1]
                TempMatrix ← stack(TempMatrix, transpose(transpose(MatrixUse)[:, j]))
                if j == rows(MatrixUse) - 1
                    ENDividedNDMatrix[n] ← RemoveInitializingZeroRow(TempMatrix)
                    n ← n + 1
            otherwise
                ENDividedNDMatrix[n] ← RemoveInitializingZeroRow(TempMatrix)
                n ← n + 1
                TempMatrix ← [0, 0, 0, 0]
                TempMatrix ← stack(TempMatrix, transpose(transpose(MatrixUse)[:, j])) if j ≠ rows(MatrixUse) - 1
                otherwise
                    TempMatrix ← stack(TempMatrix, transpose(transpose(MatrixUse)[:, j]))
                    ENDividedNDMatrix[n] ← RemoveInitializingZeroRow(TempMatrix)
                    n ← n + 1
    return ENDividedNDMatrix
# Tbe function DivideMatrixEN takes the output from ENSortMatrix and divides each small matrix into smaller ones with the same EN value. The output (called DIvidedPipeMatrix from this point) now contains a series of smaller matries, each of which has rows (pipes) with the same ND and EN values.
DividedPipeMatrix := DivideMatrixEN(ENSortedNDPipeMatrix) = [
    [5, 1, 1, 2]; [5, 2, 2, 2; 1, 2, 2, 4; 1, 2, 2, 5; 4, 2, 2, 6; 1, 2, 2, 6]; [3, 2, 8, 65]; [4, 3, 1, 21]; [1, 3, 2, 8; 1, 3, 2, 5]; [4, 4, 8, 4]; [2, 5, 5, 8; 4, 5, 5, 32; 2, 5, 5, 6; 3, 5, 5, 7; 5, 5, 5, 41; 2, 5, 5, 9; 4, 5, 5, 8]; [4.5, 6, 4, 1; 4, 6, 4, 6]
] m
DividedLongPipesMatrix := DivideMatrixEN(ENSortedNDLongPipesMatrix) = [
    [6, 1, 3, 3]; [33, 2, 1, 65; 33, 2, 1, 21]; [6, 4, 6, 35]; [6, 5, 5, 9]; [10, 5, 6, 6]; [9.5, 6, 4, 5; 10, 6, 4, 4; 8, 6, 4, 5; 9.5, 6, 4, 5]
] m
DividedLongPipesMatrix[0] = [6, 1, 3, 3] m
DividedPipeMatrix[0] = [5, 1, 1, 2] m
DividedLongPipesMatrix[1] = [33, 2, 1, 65; 33, 2, 1, 21] m
DividedLongPipesMatrix[2] = [6, 4, 6, 35] m
DividedPipeMatrix[1] = [5, 2, 2, 2; 1, 2, 2, 4; 1, 2, 2, 5; 4, 2, 2, 6; 1, 2, 2, 6] m
DividedLongPipesMatrix[3] = [6, 5, 5, 9] m
DividedLongPipesMatrix[4] = [10, 5, 6, 6] m
DividedPipeMatrix[2] = [3, 2, 8, 65] m
DividedPipeMatrix[3] = [4, 3, 1, 21] m
DividedLongPipesMatrix[5] = [9.5, 6, 4, 5; 10, 6, 4, 4; 8, 6, 4, 5; 9.5, 6, 4, 5] m
DividedPipeMatrix[4] = [1, 3, 2, 8; 1, 3, 2, 5] m
DividedPipeMatrix[5] = [4, 4, 8, 4] m
DividedPipeMatrix[6] = [2, 5, 5, 8; 4, 5, 5, 32; 2, 5, 5, 6; 3, 5, 5, 7; 5, 5, 5, 41; 2, 5, 5, 9; 4, 5, 5, 8] m
DividedPipeMatrix[7] = [4.5, 6, 4, 1; 4, 6, 4, 6] m
CombineLengths(SortedPipeMatrix) :=
    CombinedMatrix ← [0, 0, 0, 0]
    TempMatrix ← [0, 0, 0, 0]
    for i ∈ 0 .. (rows(SortedPipeMatrix) - 2)
        for j ∈ i + 1 .. (rows(SortedPipeMatrix) - 1)
            if SortedPipeMatrix[:, 3][i] ≠ 0 and SortedPipeMatrix[:, 3][j] ≠ 0
                if SortedPipeMatrix[:, 0][i] == SortedPipeMatrix[:, 0][j] and SortedPipeMatrix[:, 1][i] == SortedPipeMatrix[:, 1][j] and SortedPipeMatrix[:, 2][i] == SortedPipeMatrix[:, 2][j]
                    if TempMatrix ≠ [0, 0, 0, 0]
                        CombinedMatrix[:, 3][rows(CombinedMatrix) - 1] ← CombinedMatrix[:, 3][rows(CombinedMatrix) - 1] + SortedPipeMatrix[:, 3][j]
                        SortedPipeMatrix[:, 3][j] ← 0
                    otherwise
                        TempMatrix ← transpose(transpose(SortedPipeMatrix)[:, i])
                        TempMatrix[:, 3] ← TempMatrix[:, 3] + SortedPipeMatrix[:, 3][j]
                        CombinedMatrix ← stack(CombinedMatrix, TempMatrix)
                        SortedPipeMatrix[:, 3][j] ← 0
                otherwise
                    if TempMatrix ≠ [0, 0, 0, 0]
                        SortedPipeMatrix[:, 3][i] ← 0
                        TempMatrix ← [0, 0, 0, 0]
                        CombinedMatrix ← stack(CombinedMatrix, transpose(transpose(SortedPipeMatrix)[:, j])) if i == rows(SortedPipeMatrix) - 3
                    otherwise
                        CombinedMatrix ← stack(CombinedMatrix, transpose(transpose(SortedPipeMatrix)[:, i]))
                        SortedPipeMatrix[:, 3][i] ← 0
                        CombinedMatrix ← stack(CombinedMatrix, transpose(transpose(SortedPipeMatrix)[:, j])) if i == rows(SortedPipeMatrix) - 2
    return RemoveInitializingZeroRow(CombinedMatrix)
# The code CombineLengths is meant to combine pipes with same length, ND and EN. All rows but one are eliminated and the number of pipes (fourth column) are added together to make the code easier to handle.
# HOWEVER, the code does not work for rows that are not consecutive because of last otherwise statement (SortedPipeMatrix<3>)i <- 0. The code here was originally written so that it would work for cases where there were non-consecutive rows, which is why it is so complicated. The next function (CombineLengthsInDividedMatrix) uses CombineLengths in such a way that the code does work as intended. The code may be modified in the future so that it performs the same function but isn't so overly complicated.
CombineLengthsInDividedMatrix(DividedPipeMatrix) :=
    for i ∈ 0 .. rows(DividedPipeMatrix) - 1
        if rows(DividedPipeMatrix[i]) > 1
            SortedMatrix ← csort(DividedPipeMatrix[i], 0)
            CombinedMatrix[i] ← CombineLengths(SortedMatrix)
        CombinedMatrix[i] ← DividedPipeMatrix[i] otherwise
    return CombinedMatrix
CombinedDividedMatrix := CombineLengthsInDividedMatrix(DividedPipeMatrix) = [
    [5, 1, 1, 2]; [1, 2, 2, 15; 4, 2, 2, 6; 5, 2, 2, 2]; [3, 2, 8, 65]; [4, 3, 1, 21]; [1, 3, 2, 13]; [4, 4, 8, 4]; [2, 5, 5, 23; 3, 5, 5, 7; 4, 5, 5, 40; 5, 5, 5, 41]; [4, 6, 4, 6; 4.5, 6, 4, 1]
] m
CombinedDividedLongPipesMatrix := CombineLengthsInDividedMatrix(DividedLongPipesMatrix) = [
    [6, 1, 3, 3]; [33, 2, 1, 86]; [6, 4, 6, 35]; [6, 5, 5, 9]; [10, 5, 6, 6]; [8, 6, 4, 5; 9.5, 6, 4, 10; 10, 6, 4, 4]
] m
CombinedDividedLongPipesMatrix[0] = [6, 1, 3, 3] m
CombinedDividedMatrix[0] = [5, 1, 1, 2] m
CombinedDividedLongPipesMatrix[1] = [33, 2, 1, 86] m
CombinedDividedMatrix[1] = [1, 2, 2, 15; 4, 2, 2, 6; 5, 2, 2, 2] m
CombinedDividedLongPipesMatrix[2] = [6, 4, 6, 35] m
CombinedDividedMatrix[2] = [3, 2, 8, 65] m
CombinedDividedLongPipesMatrix[3] = [6, 5, 5, 9] m
CombinedDividedLongPipesMatrix[4] = [10, 5, 6, 6] m
CombinedDividedMatrix[3] = [4, 3, 1, 21] m
CombinedDividedLongPipesMatrix[5] = [8, 6, 4, 5; 9.5, 6, 4, 10; 10, 6, 4, 4] m
CombinedDividedMatrix[4] = [1, 3, 2, 13] m
CombinedDividedMatrix[5] = [4, 4, 8, 4] m
CombinedDividedMatrix[6] = [2, 5, 5, 23; 3, 5, 5, 7; 4, 5, 5, 40; 5, 5, 5, 41] m
CombinedDividedMatrix[7] = [4, 6, 4, 6; 4.5, 6, 4, 1] m
CombinePipeNumber(LanceMatrix) :=
    CombinedLanceMatrix ← [0, 0, 0]
    for i ∈ 1 .. rows(LanceMatrix) - 1
        if LanceMatrix[:, 1][i] == LanceMatrix[:, 1][i - 1] and LanceMatrix[:, 2][i] == LanceMatrix[:, 2][i - 1]
            CombinedLanceMatrix ← stack(CombinedLanceMatrix, transpose(transpose(LanceMatrix)[:, i - 1])) if LanceMatrix[:, 1][i] ≠ CombinedLanceMatrix[:, 1][rows(CombinedLanceMatrix) - 1] and LanceMatrix[:, 2][i] ≠ CombinedLanceMatrix[:, 2][rows(CombinedLanceMatrix) - 1]
            CombinedLanceMatrix[:, 0][rows(CombinedLanceMatrix) - 1] ← CombinedLanceMatrix[:, 0][rows(CombinedLanceMatrix) - 1] + LanceMatrix[:, 0][i]
        otherwise
            CombinedLanceMatrix ← stack(CombinedLanceMatrix, transpose(transpose(LanceMatrix)[:, i - 1]))
            CombinedLanceMatrix ← stack(CombinedLanceMatrix, transpose(transpose(LanceMatrix)[:, i])) if i == rows(LanceMatrix) - 1
    return RemoveInitializingZeroRow(CombinedLanceMatrix)
# The function CombinePipeNumber is similar to the CombineLengths function above, except it combines the numbers of rows (pipes) with the same EN and ND in the new matrix LanceMatrix (created below).
CutLongPipes(LongPipesDividedMatrix) :=
    n ← 0
    LanceMatrix ← [0, 0, 0]
    for i ∈ 0 .. rows(LongPipesDividedMatrix) - 1
        MatrixUse ← LongPipesDividedMatrix[i]
        LanceTempMatrix ← [0, 0, 0]
        CountZeros ← 0
        for j ∈ 0 .. rows(MatrixUse) - 1
            NumberOfLances ← floor(MatrixUse[:, 0][j]/L_UseableLance)
            LeftoverLength ← MatrixUse[:, 0][j] - NumberOfLances*L_UseableLance
            TempMatrix ← [0, 0, 0]
            TempMatrix[:, 0] ← NumberOfLances*MatrixUse[:, 3][j]
            TempMatrix[:, 1] ← MatrixUse[:, 1][j]
            TempMatrix[:, 2] ← MatrixUse[:, 2][j]
            LanceTempMatrix ← stack(LanceTempMatrix, TempMatrix)
            MatrixUse[:, 0][j] ← LeftoverLength
            CountZeros ← 1 if LeftoverLength == 0
        if CountZeros == 1 and rows(MatrixUse) > 1
            LeftoverMatrix[n] ← RemoveZeroLengths(MatrixUse)
            n ← n + 1
        if CountZeros == 0
            LeftoverMatrix[n] ← MatrixUse
            n ← n + 1
        LanceMatrix ← stack(LanceMatrix, RemoveInitializingZeroRow(LanceTempMatrix))
    return [LeftoverMatrix; RemoveInitializingZeroRow(CombinePipeNumber(LanceMatrix))]
# The function CutLongPipes will calculate the number of lances that each pipe within the divided LongPipesMatrix needs to be constructed. This number is assigned to its corresponding ND and EN values in the new matrix LanceMatrix. The rest of the length needed to construct the pipe is retained in the old divided LongPipesMatrix, now renamed LeftoverMatrix.
LongPipesCut := CutLongPipes(CombinedDividedLongPipesMatrix) = [
    [
        [0.5, 1, 3, 3]; [0.5, 4, 6, 35]; [0.5, 5, 5, 9]; [4.5, 5, 6, 6]; [2.5, 6, 4, 5; 4, 6, 4, 10; 4.5, 6, 4, 4]
    ];
    [3, 1, 3; 516, 2, 1; 35, 4, 6; 9, 5, 5; 6, 5, 6; 19, 6, 4]
] m
# n = number of lances used | ND | EN
LeftoverMatrix := LongPipesCut[0] = [
    [0.5, 1, 3, 3]; [0.5, 4, 6, 35]; [0.5, 5, 5, 9]; [4.5, 5, 6, 6]; [2.5, 6, 4, 5; 4, 6, 4, 10; 4.5, 6, 4, 4]
] m
LanceMatrix := LongPipesCut[1] = [3, 1, 3; 516, 2, 1; 35, 4, 6; 9, 5, 5; 6, 5, 6; 19, 6, 4] m
LeftoverMatrix[0] = [0.5, 1, 3, 3] m
LeftoverMatrix[1] = [0.5, 4, 6, 35] m
LeftoverMatrix[2] = [0.5, 5, 5, 9] m
LeftoverMatrix[3] = [4.5, 5, 6, 6] m
LeftoverMatrix[4] = [2.5, 6, 4, 5; 4, 6, 4, 10; 4.5, 6, 4, 4] m
CombineShortAndLeftover(ShortPipeMatrix, LeftoverMatrix) :=
    □  # error: This placeholder is empty.
# The function CombineShortAndLeftover will combine the divided ShortPipeMatrix and LeftoverMatrix into one Matrix, since they both contain information about pipes less than the length of a useable lance.
RemoveZeroN(LanceMatrix) :=
    n ← 0
    NoZerosMatrix ← [0, 0, 0, 0]
    for i ∈ 0 .. rows(LanceMatrix) - 1
        if LanceMatrix[:, 3][i] ≠ 0
            NoZerosMatrix ← stack(NoZerosMatrix, transpose(transpose(LanceMatrix)[:, i]))
            n ← n + 1
    return RemoveInitializingZeroRow(NoZerosMatrix)
# RemoveZeroN will take a LanceMatrix and remove any rows with no number N - it will be used in the AddToLanceMatrix function below to prevent double-counting.
# inputs: (number to be added, ND, EN of pipe to be added, existing LanceMatrix with units)
# outputs: new LanceMatrix with units
AddToLanceMatrix(n, ND, EN, LanceMatrix) :=
    k ← 0
    LanceMatrix ← LanceMatrix/(1 m)
    for i ∈ 0 .. rows(LanceMatrix) - 1
        if ND == LanceMatrix[:, 1][i] and EN == LanceMatrix[:, 2][i] and m == 0
            LanceMatrix[:, 0][i] ← LanceMatrix[:, 0][i] + n
            k ← 1
    LanceMatrix ← stack(LanceMatrix, [n, ND, EN]) if k == 0
    return 1 m*LanceMatrix  # AddToLanceMatrix adds a specified number (n) of pipes to the row in LanceMatrix with the appropriate ND and EN values.
CuttingOptimization(DividedMatrix, LanceMatrix) :=
    CutMatrix ← [0, 0, 0]
    for i ∈ 0 .. rows(DividedMatrix) - 1
        TempCutLengths ← [0]
        TempCutMatrix ← [0, 0, 0]
        MatrixUse ← DividedMatrix[i]
        LanceUse ← L_UseableLance
        for j ∈ 0 .. rows(MatrixUse) - 1
            LongestLength ← max(MatrixUse[:, 0])
            if rows(MatrixUse) - 1 == 0
                TempCutLengths ← stack(TempCutLengths, MatrixUse[:, 0])
                TempCutMatrix[:, 1] ← MatrixUse[:, 1][j]
                TempCutMatrix[:, 2] ← MatrixUse[:, 2][j]
                CutMatrix ← stack(CutMatrix, TempCutMatrix)
                CutMatrix[:, 0][rows(CutMatrix) - 1] ← RemoveInitializingZeroRow(TempCutLengths)
            if LongestLength ≤ LanceUse
                LanceUse ← LanceUse - LongestLength
                TempCutLengths ← stack(TempCutLengths, LongestLength)
                for k ∈ 0 .. rows(MatrixUse) - 1
                    MatrixUse[:, 3][k] ← MatrixUse[:, 3][k] - 1 m if LongestLength == MatrixUse[:, 0][k]
                    MatrixUse ← RemoveZeroN(MatrixUse) if MatrixUse[:, 3][k] == 0
            otherwise
                TempCutMatrix[:, 1] ← MatrixUse[:, 1][j]
                TempCutMatrix[:, 2] ← MatrixUse[:, 2][j]
                CutMatrix ← stack(CutMatrix, TempCutMatrix)
                CutMatrix[:, 0][rows(CutMatrix) - 1] ← RemoveInitializingZeroRow(TempCutLengths)
                TempCutLengths ← [0]
                TempCutMatrix ← [0, 0, 0]
                LanceMatrix ← AddToLanceMatrix(1, MatrixUse[:, 1][j]/(1 m), MatrixUse[:, 2][j]/(1 m), LanceMatrix)
    return [RemoveInitializingZeroRow(CutMatrix); LanceMatrix]
# CuttingOptimization is intended to go through the divided PipeMatrix and perform a typical cutting stock optimization on all of the pipes in each small matrix.
# The first if statement (rows(MatrixUse)-1=0) does work as intended.
# HOWEVER, the other if and otherwise statements are not working. These will need to be fixed.
