# Main Author: Dhaval Mehta 13/8/2014
# First Check:
# Second Check:
# Final Approved by:
Q_Plant := 0.8*L/s
# Low Flow Stacked Rapid Sand Filter
# [reference: ExpertInputs.xmcd]
# [reference: MathFunctions.xmcd]
# [reference: PipeDatabase - may.xmcd]
# [reference: MaterialsDatabase.xmcd]
# [reference: FluidsFunctions.xmcd]
# Dimensions, Pipe Sizes and other User Inputs
# Filter body and flow assumptions | Manifold assumptions | Other pipe size assumptions
ND_FiInletWeir := 4 in
ND_FiPipe := 12 in
N_FiManBranch := 3  # number of branches on a single side
ND_FiInletOrificePipe := 2 in
ND_FiBwDrain := 2 in
PS_Fi := 2
# (Schedule 40)
PS_Default := 2
PS_FiBranch := PS_Fi
ND_RvsFlowDrain := 1 in
A_Fi := π/4*ND_FiPipe^2 = 0.0729659 m^2
ND_FiManBranchMin := 1 in  # 1in is smallest available size in India
ND_FiAirRelValve := 0.5 in
# ND of the air removal valve on top of the filter
V_FiBw = 0.011 m/s
ND_FiManTrunkMin := max(ND_FiManBranchMin*2, NextLargest(1.005*ND_FiManBranchMin, AvailND)) = 2 in
# must be at least double the size for ease of fabrication
Q_Fi := V_FiBw*A_Fi = 0.802625 L/s
N_FiMin := 2
N_Fi := ceil(Q_Plant/Q_Fi) = 1
N_FiInletPipes := 4
N_FiOutletPipes := 3
H_FiLayer := 20 cm
# Sand drain assumptions
# Gasket Assumptions
# Geometric Assumptions (filter layout)
AN_FiSandDrain := -60 deg
H_Shimstock := 1.5 in = 3.81 cm
S_FiTanks := 20 cm  # shortest distance between entrance tank and filter body
# So that rigid piping works. Ends up making the system wide. Might require stands under the entrance/exit tanks
ND_FiSandDrain := 1 in
H_Gasket := H_Shimstock + 2 cm = 5.81 cm
S_SandDrain := 20 cm  # Height of Sand Drain above plant floor, to allow easy removal of sand. Bw Drain exit height is finally set by this constraint
T_Gasket := 6 mm
AN_FiTanks := 35 deg  # angle the entrance tank makes with the +ve y-axis.
Z_FiSandDrain := H_Gasket + 1 cm + ConRadius(ND_FiSandDrain) = 8.79437 cm
H_FiCap := 10 mm
AN_FiBwDrain := -150 deg  # angle the backwash drain pipe makes with the +ve x-axis
Z_FiBody := H_FiCap
# Space between bottom of entrace tank to topmost inlet of filter body.
# Atleast 10cm over the topmost inlet, so that its easy to tie it onto the filter without bumping into pipes
S_TanktoInlet := 10 cm
H_FiStand := S_SandDrain - Z_FiSandDrain = 11.2056 cm  # Height of the stand that the filter is placed on
Z_Floor := Z_FiSandDrain - S_SandDrain = -11.2056 cm
Z_FiBwExit := Z_Floor + 2 cm + ElbowRadius(ND_FiBwDrain) + SocketDepth(ND_FiBwDrain) = -1.43856 cm
# Offset from floor (2cm) (safety) + space for 1 Elbow.
# Flow Distribution Constraints: Ratio of Pressure Recovery to Clean Bed Head Loss
# There are three flow distribution problems in the filter design: distribution between the slots along a manifold branch, distribution between branches along a trunk, and distribution between filter layers. The first two are both addressed by making pressure recovery in the manifold (both trunks and branches) small relative to the short path head loss (head loss through the clean bed, since slot head loss in forward filtration is small). In backwash mode where there is no bed head loss, the pressure recovery in the manifold plumbing must be small relative to slot head loss.
#
# Head loss through the inlet and outlet plumbing differs for different layers both because the number of elbows varies and because the top and bottom inlets have 1/2 the flow of the middle two. Therefore good flow distribution between layers would be addressed by making head loss through the inlet and outlet plumbing small for all layers relative to clean bed head loss. We do not have an explicit constraint set for this, but the constraint on trunk diameter which gives good flow distribution within the manifolds seems to be sufficient to take care of it. As a check, see the analysis under the section "Path Head Loss Calculations and Flow Distribution Between Layers" below.
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Pi_FiManifoldQ := 0.85  # Ratio of long path flow to short path flow
Pi_FiManifoldHeadLoss := 1 - Pi_FiManifoldQ^2 = 0.2775
# Ratio of pressure recovery in the slotted pipes to the head loss through the clean bed (or through the slots in backwash mode)
# Even though the piezometric head profiles for the inlet and outlet manifolds on the middle layers may be parallel meaning that pressure recovery there need not be small for good distribution between sand bed flow paths, we still need pressure recovery to be small in the outlet manifolds in order to get good flow distribution in the top and bottom layers where the velocity in the manifolds is 1/2 and the pressure recovery 1/4 that of other layers (even smaller in the larger-diameter bottom manifold where velocity head is tiny).
# Clean Bed Head Loss and Maximum Manifold Velocity
# Filtration manifold maximum velocity
HL_FiCleanLayer := h_lKozeny(H_FiLayer, D_FiSand60, Q_Fi/(N_FiLayer*A_Fi), ε_FiSand, Nu_Water) = 5.56209 cm  # worst case scenario
PR_FiBranchMax := HL_FiCleanLayer*Pi_FiManifoldHeadLoss = 1.54348 cm
V_FiBranchMaxPR := sqrt(2*g*PR_FiBranchMax) = 0.550207 m/s
# this is the max velocity through a slotted pipe to ensure the headloss is much smaller than that through a sand layer
# Backwash manifold maximum velocity
HL_FiBwSlotsEst := 5 cm
PR_FiBwManifoldMax := HL_FiBwSlotsEst*Pi_FiManifoldHeadLoss = 0.013875 m
# this ensures a low pressure recovery along the manifold (not slots) to ensure even flow distribution among slots during backwash
V_FiBwManMaxPR := sqrt(2*g*PR_FiBwManifoldMax) = 0.521665 m/s
# Trunk and Slotted Pipe Diameter, and Height of Filter Pipe
Q_FiLayer := Q_Fi/N_FiLayer = 0.133771 L/s  # This is the flow rate through each filter layer
A_FiTrunkMax := Q_Fi/V_FiBwManMaxPR  # max flow rate through any given trunk (backwash limited)
# max flow rate through any branch (filtration limited)
A_FiBranchMax := 1/3*Q_Fi/(2*N_FiManBranch*V_FiBranchMaxPR) = 8.10428e-5 m^2
# N.FiManBranch is the number of branches on a single side!
ND_FiManTrunk := max(NominalDiameter(CeilNearest(D_circle(A_FiTrunkMax), AvailPipeSizes(PS_Default)[:, 0]), PS_Default), ND_FiManTrunkMin) = 2 in
# keep all trunk sizes the same, should also be suffiicient for filtration
ND_FiManBranch := max(NominalDiameter(CeilNearest(D_circle(A_FiBranchMax), AvailPipeSizes(PS_Default)[:, 0]), PS_Default), ND_FiManBranchMin) = 1 in
# Entrance and Exit Tank Diameters, and Height of Filter Pipe
S_FiInlet4 := H_Gasket - H_FiCap + 2 cm + ConRadius(ND_FiManTrunk) = 10.2231 cm  # Height of the entrance of the midpoint of Inlet 4 on the filter body
H_FiBodyPipe := max(Pi_FiFluidized*6*H_FiLayer + S_FiInlet4 + 20 cm, 2 m) = 2 m
ND_FiEntTank := NextLargest(2*ConRadius(ND_FiInletWeir) + 4*ConRadius(ND_FiManTrunk), AvailND) = 12 in
ND_FiExitTank := 10 in  # Based on minimum space needed to fit pipes
# Manifold Pipe Lengths
L_FiManCoupling := CouplingLength(ND_FiManTrunk)
H_FiManCap := CapHeight(ND_FiManTrunk)/2
L_FiManCouplingOffset := 0.5*innerdiameter(ND_FiPipe, PS_Fi) - ConRadius(ND_FiManTrunk)/tan(asin(2*ConRadius(ND_FiManTrunk)/innerdiameter(ND_FiPipe, PS_Fi))) = 3.89179 mm
L_FiManCapOffset := 0.5*innerdiameter(ND_FiPipe, PS_Fi) - ConRadius(ND_FiManBranch)/tan(asin(2*ConRadius(ND_FiManBranch)/innerdiameter(ND_FiPipe, PS_Fi)))
L_FiManTrunkCapOffset := 0.5*innerdiameter(ND_FiPipe, PS_Fi) - ConRadius(ND_FiManTrunk)/tan(asin(2*ConRadius(ND_FiManTrunk)/innerdiameter(ND_FiPipe, PS_Fi))) = 3.89179 mm
S_FiManBranchEnds := L_FiManCouplingOffset - 0.5*SocketDepth(ND_FiManTrunk) + CouplingLength(ND_FiManTrunk) = 7.36018 cm
# distance from inner end of filter body to center of nearest branch
L_FiManTrunk := innerdiameter(ND_FiPipe, PS_Fi) - L_FiManCouplingOffset + SocketDepth(ND_FiManTrunk) - L_FiManTrunkCapOffset - CapThickness(ND_FiManTrunk) - CouplingLength(ND_FiManTrunk) = 9.63633 in
# Assume caps have flat ends.
S_FiManBranch := (innerdiameter(ND_FiPipe, PS_Fi) - 2*S_FiManBranchEnds)/(N_FiManBranch - 1) = 7.80108 cm
B_FiManBranch := S_FiManBranch + outerdiameter(ND_FiManBranch) = 11.1412 cm
# Length of Branches (one side) | Assume caps have flat ends.
L_FiManBranch :=
    for i ∈ 0 .. N_FiManBranch - 1
        L[i] ←
            (0.5*innerdiameter(ND_FiPipe, PS_Fi)*sin(acos((0.5*innerdiameter(ND_FiPipe, PS_Fi) - S_FiManBranchEnds + ConRadius(ND_FiManBranch) - S_FiManBranch*i)/(0.5*innerdiameter(ND_FiPipe, PS_Fi)))) - 0.5*innerdiameter(ND_FiManTrunk, PS_FiBranch)) - CapThickness(ND_FiManBranch) if i < N_FiManBranch/2
            (0.5*innerdiameter(ND_FiPipe, PS_Fi) - 0.5*innerdiameter(ND_FiManTrunk, PS_FiBranch) - L_FiManCapOffset - CapThickness(ND_FiManBranch)) if i + 0.5 == N_FiManBranch/2
            L[N_FiManBranch - 1 - i] otherwise
    L
    = [0.0864111; 0.120914; 0.0864111] m
L_FiManBranch = [3.40201; 4.7604; 3.40201] in
L_FiManBranchAve := sum(L_FiManBranch)/N_FiManBranch = 0.0979122 m
# Total Lengths of Slotted pipes needed on one trunk (assuming that pipes are simply driven through the trunks without connectors):
L_FiManBranchTotal := 2*sum(L_FiManBranch) + innerdiameter(ND_FiManTrunk, PS_FiBranch) = 0.639975 m
# Slot Specifications and Headloss
L_FiManBranchAvail := 2*(sum(L_FiManBranch) - N_FiManBranch*H_FiManCap) = 17.0351 in
# This is the total length of branch manifold available on a trunk (i.e., the length available for slots on 2*N.FiManBranch)
# We select  B_FiManSlot := 1/8*in = 3.175 mm  for the closest slot spacing, and N_FiSlotRows := 2  for best structural integrity of these pipes
# I.e., Two sided slots throughout the filter, with equal area on each trunk
Q_FiManBranchFwd := 1/3*Q_Fi/(2*N_FiManBranch)
PR_FiBwManTrunk := (Q_Fi/(innerD(ND_FiManTrunk, PS_Fi)^2*π/4))^2/(2*g) = 7.00806 mm
HL_FiBwSlotDesired := PR_FiBwManTrunk/Pi_FiManifoldHeadLoss = 2.52543 cm  # ensures even flow among slots during BW
A_FiManSlotsDesired := A_orifice(HL_FiBwSlotDesired, Pi_VenaContractaOrifice, Q_Fi) = 18.1021 cm^2  # for one manifold, during backwash
Pi_SlotLength := 60 %  # this percent of the inner circumference is the slot length
L_FiBranchSlotInnerCurved := π*innerD(ND_FiManBranch, PS_Fi)*Pi_SlotLength/2 = 0.0251119 m
L_FiBranchSlot := innerD(ND_FiManBranch, PS_Fi)*sin(L_FiBranchSlotInnerCurved/innerD(ND_FiManBranch, PS_Fi)) = 0.0215559 m
A_PerLengthSlottedPipe := W_FiManSlots*L_FiBranchSlot*N_FiSlotRows/B_FiManSlot = 0.00275916 m  # slot area per length of slotted pipe
L_DesiredSlottedPipe := A_FiManSlotsDesired/A_PerLengthSlottedPipe = 0.656073 m  # desired length of slotted pipe
L_FiManBranchAvail = 0.432692 m  # actual available length of slotted pipe in a manifold
A_ManSlotsTotal := A_PerLengthSlottedPipe*L_FiManBranchAvail = 0.00119387 m^2  # this is (actual) in one manifold
HL_FiBwSlot := (Q_Fi/(A_ManSlotsTotal*Pi_VenaContractaOrifice))^2/(2*g)
PR_FiBwManTrunk = 7.00806 mm  # bw pressure recovery constraint is met
Pi_BwHLActual := PR_FiBwManTrunk/HL_FiBwSlot = 0.120702
PR_FiManBranch := (1/3*Q_Fi/(innerD(ND_FiManBranch, PS_Fi)^2*π/4))^2/(2*g) = 1.17386 cm
# filtration pressure recovery constraint is met
Pi_FiHLActual := PR_FiManBranch/HL_FiCleanLayer = 0.211046
HL_FiSlotFwd(Q) := (Q/(ε_FiSand*A_ManSlotsTotal*Pi_VenaContractaOrifice))^2/(2*g)
HL_FiSlotFwd(Q_Fi/3) = 40.3199 mm  # middle trunks
HL_FiSlotFwd(Q_Fi/6) = 10.08 mm  # top and bottom trunks
L_FiBranchSlot = 2.15559 cm
Radius_Trunk := innerdiameter(ND_FiManTrunk, 2)/2 = 26.2509 mm
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Chord_TrunkPerpendicular := outerdiameter(ND_FiManBranch) = 3.3401 cm
Chord_TrunkHorizontal := (Radius_Trunk*cos(asin(Chord_TrunkPerpendicular/2/Radius_Trunk))) = 2.02535 cm
L_SlotCut := floor(Chord_TrunkHorizontal*2/B_FiManSlot)*B_FiManSlot + W_FiManSlots = 38.3032 mm
# Total Sand Depth and Backwash Head Loss through Sand Layers
A_FiActive := π*innerdiameter(ND_FiPipe, PS_Fi)^2/4 - (L_FiManTrunk*outerdiameter(ND_FiManTrunk) + (2*sum(L_FiManBranch) - N_FiManBranch*outerdiameter(ND_FiManTrunk))*outerdiameter(ND_FiManBranch))
H_FiSand := N_FiLayer*H_FiLayer = 1.2 m
H_FiSandTotal := H_FiSand + S_FiInlet4 = 1.30223 m
H_FiBottomLayer := H_FiSandTotal - 5*H_FiLayer = 0.302231 m
H_FiInactiveLayer := H_FiSandTotal - H_FiSand = 0.102231 m
H_FiFluidizedBed := Pi_FiFluidized*H_FiSand = 1.56 m
D_FiSand60 = 0.825 mm
# Sand bed head loss during steady state backwash.
HL_FiBwSS := H_FiSand*(Rho_FiSand - Rho_H2O)*(1 - ε_FiSand)/Rho_H2O = 1.188 m  # Is it right to use H.FiSand instead of H.FiSandTotal here?
HL_FiDirty := 40 cm  # Mickey suggested this value based on lab experience. Don't know if this is the same for the low flow filter
HL_FiTerminalSand := HL_FiCleanLayer + HL_FiDirty = 45.5621 cm
# HL.FiBwSF is the safety factor for Backwash initiation - this has NOT been changed from expert inputs, is curently at 20cm - We feel this might be a bit low? See Elevations section for Inlet Stub Heights, where this might play a role
HL_FiBwInitiationSand := HL_FiBwSF + HL_FiBwSS = 1.388 m
# Manifold Plumbing Head Loss
# Calculating K Values for Branch arrangement in Trunks
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outerdiameter(ND_FiManBranch) = 1.315 in
Radius_Trunk = 0.0262509 m
Chord_TrunkPerpendicular = 0.033401 m
A_Arc := π*Radius_Trunk^2*(180 deg - (2*acos(Chord_TrunkPerpendicular/2/Radius_Trunk)))/(360 deg) = 475.174 mm^2
Chord_TrunkHorizontal = 0.0202535 m
A_Tri := 2*(0.5*Chord_TrunkPerpendicular/2*Chord_TrunkHorizontal) = 338.243 mm^2
A_BranchProj := 2*(A_Arc + A_Tri) = 1626.83 mm^2
A_Cut := L_SlotCut*L_FiBranchSlot = 825.661 mm^2
A_Unobstructed := π*innerdiameter(ND_FiManTrunk, PS_Default)^2/4 - (A_BranchProj - A_Cut) = 1363.73 mm^2
Pi_Area := Pi_VenaContractaOrifice*A_Unobstructed/(π*innerdiameter(ND_FiManTrunk, PS_Default)^2/4) = 0.396854
# Refering to
# http://web2.clarkson.edu/projects/subramanian/ch330/notes/Minor%20Losses.pdf, it states that for sudden contractions, the loss coeffcient K can be expressed as:
# K_L={1-(A_2/A_1)}^2 if d/D >= 0.76. Should we be using π_VC*A_Obstruction?It makes a significant difference. The values of K are consistent with expected values from K vs (A_2/A_1) graph . refer to page 2 of  http://www.civil.uwaterloo.ca/enve214/files/expansions_pumps.pdf
K_SEFi := (1 - Pi_Area)^2
K_SEFi = 0.363785
# Distribution losses along branches+minor loss through obstruction. We assume three sub flows or expansions through the unobstructed area.
# head loss along branch
# slot head loss
HL_FiManifoldFwd(Q) := HL_Manifold(Q, ND_FiManTrunk, L_FiManTrunk, 3*K_SEFi, Nu_Water, E_Pvc, 3) + HL_Manifold(Q/(N_FiManBranch*2), ND_FiManBranch, L_FiManBranchAve, Pi_VenaContractaOrifice, Nu_Water, E_Pvc, L_FiManBranchAve/B_FiManSlot) + HL_FiSlotFwd(Q)
HL_CheckMinor(Q) := h_e(Q, ND_FiManTrunk, K_SEFi) + h_e(2*Q/3, ND_FiManTrunk, K_SEFi) + h_e(Q/3, ND_FiManTrunk, K_SEFi)
# This calculation is just to check the effect of minor losses if we consider decreasing flow throughout the trunk
HL_CheckMinor(Q_Fi/3) = 0.502722 mm
# Path Head Loss Calculations and Flow Distribution Between Layers
# Heights of Tanks and Stubs:
Z_EntTankAssume := 1.5 m  # Assume bottom of tank is 1.5m from the bw manifold entry
H_PipeStub1 := 25 cm
H_PipeStub2 := 20 cm  # Assume Pipe stub heights
# Filter Outlet Plumbing Lengths:
H_PipeStub3 := 15 cm
Z_ExitTankAssume := Z_EntTankAssume
L_Hor := 20 cm  # Assume a horizontal pipe section of 20cm
L_OutletPlumbing1 := Z_ExitTankAssume + 5*H_FiLayer + L_Hor = 2.7 m
L_OutletPlumbing2 := Z_ExitTankAssume + 3*H_FiLayer + L_Hor = 2.3 m
# Inlet Plumbing Lengths:
L_OutletPlumbing3 := Z_ExitTankAssume + H_FiLayer + L_Hor = 1.9 m
L_InletPlumbing1 := H_PipeStub1 + Z_EntTankAssume + 6*H_FiLayer + L_Hor = 10.3346 ft
L_InletPlumbing2 := H_PipeStub2 + Z_EntTankAssume + 4*H_FiLayer + L_Hor = 8.85827 ft  # Numbered from top Layer down
HL_FiOutletStubs(Q) := Headloss_weir(Q, innerdiameter(ND_FiManTrunk, PS_Default))
L_InletPlumbing3 := Z_EntTankAssume - 2*H_FiLayer + L_Hor = 4.26509 ft
L_InletPlumbing4 := Z_EntTankAssume + L_Hor = 5.57743 ft  # Manifold head loss function includes loss through slots
HL_Path1(Q1, Q2, f2) := h_l(Q1*L/s, innerD(ND_FiManTrunk, 2), L_InletPlumbing1, 3*K_El90 + K_PipeEnt, Nu_Water, E_Pvc) + HL_FiManifoldFwd(Q1*L/s) + h_lKozeny(H_FiLayer, D_FiSand60, Q1*L/s/A_Fi, ε_FiSand, Nu_Water) + HL_FiManifoldFwd(Q1*L/s + f2*Q2*L/s) + h_l(Q1*L/s + f2*Q2*L/s, innerD(ND_FiManTrunk, 2), L_OutletPlumbing1, 3*K_El90 + K_PipeExit, Nu_Water, E_Pvc) + HL_FiOutletStubs(Q1*L/s + f2*Q2*L/s)
HL_Path2(Q1, Q2, f2) := h_l(Q2*L/s, innerD(ND_FiManTrunk, 2), L_InletPlumbing2, 3*K_El90 + K_PipeEnt, Nu_Water, E_Pvc) + HL_FiManifoldFwd(Q2*L/s) + h_lKozeny(H_FiLayer, D_FiSand60, f2*Q2*L/s/A_Fi, ε_FiSand, Nu_Water) + HL_FiManifoldFwd(Q1*L/s + f2*Q2*L/s) + h_l(Q1*L/s + f2*Q2*L/s, innerD(ND_FiManTrunk, 2), L_OutletPlumbing1, 3*K_El90 + K_PipeExit, Nu_Water, E_Pvc) + HL_FiOutletStubs(Q1*L/s + f2*Q2*L/s)
HL_Path3(Q2, Q3, f2, f3) := h_l(Q2*L/s, innerD(ND_FiManTrunk, 2), L_InletPlumbing2, 3*K_El90 + K_PipeEnt, Nu_Water, E_Pvc) + HL_FiManifoldFwd(Q2*L/s) + h_lKozeny(H_FiLayer, D_FiSand60, (1 - f2)*Q2*L/s/A_Fi, ε_FiSand, Nu_Water) + HL_FiManifoldFwd((1 - f2)*Q2*L/s + f3*Q3*L/s) + h_l((1 - f2)*Q2*L/s + f3*Q3*L/s, innerD(ND_FiManTrunk, 2), L_OutletPlumbing2, 3*K_El90 + K_PipeExit, Nu_Water, E_Pvc) + HL_FiOutletStubs((1 - f2)*Q2*L/s + f3*Q3*L/s)
HL_Path4(Q2, Q3, f2, f3) := h_l(Q3*L/s, innerD(ND_FiManTrunk, 2), L_InletPlumbing3, 3*K_El90 + K_PipeEnt, Nu_Water, E_Pvc) + HL_FiManifoldFwd(Q3*L/s) + h_lKozeny(H_FiLayer, D_FiSand60, f3*Q3*L/s/A_Fi, ε_FiSand, Nu_Water) + HL_FiManifoldFwd((1 - f2)*Q2*L/s + f3*Q3*L/s) + h_l((1 - f2)*Q2*L/s + f3*Q3*L/s, innerD(ND_FiManTrunk, 2), L_OutletPlumbing2, 3*K_El90 + K_PipeExit, Nu_Water, E_Pvc) + HL_FiOutletStubs((1 - f2)*Q2*L/s + f3*Q3*L/s)
HL_Path5(Q3, Q4, f3) := h_l(Q3*L/s, innerD(ND_FiManTrunk, 2), L_InletPlumbing3, 3*K_El90 + K_PipeEnt, Nu_Water, E_Pvc) + HL_FiManifoldFwd(Q3*L/s) + h_lKozeny(H_FiLayer, D_FiSand60, (1 - f3)*Q3*L/s/A_Fi, ε_FiSand, Nu_Water) + HL_FiManifoldFwd((1 - f3)*Q3*L/s + Q4*L/s) + h_l((1 - f3)*Q3*L/s + Q4*L/s, innerD(ND_FiManTrunk, 2), L_OutletPlumbing3, 3*K_El90 + K_PipeExit, Nu_Water, E_Pvc) + HL_FiOutletStubs((1 - f3)*Q3*L/s + Q4*L/s)
HL_Path6(Q3, Q4, f3) := h_l(Q4*L/s, innerD(ND_FiManTrunk, 2), L_InletPlumbing4, K_El90 + K_PipeEnt, Nu_Water, E_Pvc) + HL_FiManifoldFwd(Q4*L/s) + h_lKozeny(H_FiLayer, D_FiSand60, Q4*L/s/A_Fi, ε_FiSand, Nu_Water) + HL_FiManifoldFwd((1 - f3)*Q3*L/s + Q4*L/s) + h_l((1 - f3)*Q3*L/s + Q4*L/s, innerD(ND_FiManTrunk, 2), L_OutletPlumbing3, 3*K_El90 + K_PipeExit, Nu_Water, E_Pvc) + HL_FiOutletStubs((1 - f3)*Q3*L/s + Q4*L/s)
# Guess
f_2 := 0.5
f_3 := 0.5
Q_1 := Q_Fi/4/(L/s) = 0.200656
Q_2 := Q_Fi/4/(L/s) = 0.200656
Q_3 := Q_Fi/4/(L/s) = 0.200656
Q_4 := Q_Fi/4/(L/s) = 0.200656
Given
f_2 < 1
f_2 > 0
Q_1 + Q_2 + Q_3 + Q_4 == Q_Fi/(L/s)
f_3 < 1
f_3 > 0
HL_Path1(Q_1, Q_2, f_2) == HL_Path2(Q_1, Q_2, f_2)
HL_Path1(Q_1, Q_2, f_2) = 0.187601 m
HL_Path2(Q_1, Q_2, f_2) == HL_Path3(Q_2, Q_3, f_2, f_3)
HL_Path2(Q_1, Q_2, f_2) = 0.145732 m
HL_Path3(Q_2, Q_3, f_2, f_3) == HL_Path4(Q_2, Q_3, f_2, f_3)
HL_Path3(Q_2, Q_3, f_2, f_3) = 0.108755 m
HL_Path4(Q_2, Q_3, f_2, f_3) == HL_Path5(Q_3, Q_4, f_3)
HL_Path4(Q_2, Q_3, f_2, f_3) = 0.108277 m
HL_Path5(Q_3, Q_4, f_3) == HL_Path6(Q_3, Q_4, f_3)
HL_Path5(Q_3, Q_4, f_3) = 0.144697 m
HL_Path6(Q_3, Q_4, f_3) = 0.185761 m
Q_Guess := Find(Q_1, Q_2, Q_3, Q_4, f_2, f_3) = [0.160187; 0.239975; 0.241131; 0.161332; 0.467764; 0.532781]
Pi_QFlowInlet2 := Q_Guess[4] = 0.467764
Pi_QFlowInlet3 := Q_Guess[5] = 0.532781
HL_Path := [
    HL_Path1(Q_Guess[0], Q_Guess[1], Pi_QFlowInlet2);
    HL_Path2(Q_Guess[0], Q_Guess[1], Pi_QFlowInlet2);
    HL_Path3(Q_Guess[1], Q_Guess[2], Pi_QFlowInlet2, Pi_QFlowInlet3);
    HL_Path4(Q_Guess[1], Q_Guess[2], Pi_QFlowInlet2, Pi_QFlowInlet3);
    HL_Path5(Q_Guess[2], Q_Guess[3], Pi_QFlowInlet3);
    HL_Path6(Q_Guess[2], Q_Guess[3], Pi_QFlowInlet3)
] = [0.149853; 0.149853; 0.149853; 0.149853; 0.149853; 0.149853] m
Q_Inlet := [Q_Guess[0]; Q_Guess[1]; Q_Guess[2]; Q_Guess[3]]*L/s = [0.160187; 0.239975; 0.241131; 0.161332] L/s
Q_Outlet := [
    Q_Inlet[0] + Pi_QFlowInlet2*Q_Inlet[1];
    (1 - Pi_QFlowInlet2)*Q_Inlet[1] + Pi_QFlowInlet3*Q_Inlet[2];
    (1 - Pi_QFlowInlet3)*Q_Inlet[2] + Q_Inlet[3]
] = [0.272439; 0.256193; 0.273993] L/s
HL_FwdFiltrationTotal := HL_Path[0] = 0.149853 m
Q_Layer := [
    Q_Inlet[0];
    Pi_QFlowInlet2*Q_Inlet[1];
    (1 - Pi_QFlowInlet2)*Q_Inlet[1];
    Pi_QFlowInlet3*Q_Inlet[2];
    (1 - Pi_QFlowInlet3)*Q_Inlet[2];
    Q_Inlet[3]
] = [0.160187; 0.112251; 0.127723; 0.12847; 0.112661; 0.161332] L/s
Pi_QLayer := sqrt(min(Q_Layer)/max(Q_Layer)) = 0.834133
# Backwash Drain Design and Total Backwash Head Losses
# How much does the filter bed over fluidize when the entrance box level lowers after backwash initiation?
# The equation for H_FiFluidizedBedVariation is taken from SRSF code and adapted for ESTARS.
H_FiFluidizedBedVariation := (HL_FiBwInitiationSand - HL_FiBwSS)*(π*innerdiameter(ND_FiEntTank, PS_Fi)^2/4 - 3*π*outerradius(ND_FiManTrunk)^2 - π*outerradius(ND_FiManTrunk)^2)/A_FiActive = 27.709 cm
HL_BwDrainTarget := 10 cm  # Assume a target drain headloss of 10 cm, and neglect length of elbows forming U bend
ND_Fi.BwDrain := D_pipeschedule(Q_Fi, PS_Default, HL_BwDrainTarget, H_FiBodyPipe, Nu_Water, E_Pvc, K_PipeEnt + K_PipeExit + 3*K_El90) = 2 in
Z_BwDrain := (H_FiBodyPipe + H_FiCap) - H_Gasket - ConRadius(ND_Fi.BwDrain) - 2 cm = 1.89777 m  # Height of Bw Drain, 2 cm below top gasket
HL_FiBwDrain := h_l(Q_Fi, innerD(ND_Fi.BwDrain, PS_Default), Z_BwDrain + 2*SocketDepth(ND_Fi.BwDrain) + Z_FiBwExit, K_PipeEnt + K_PipeExit + 3*K_El90, Nu_Water, E_Pvc) = 3.75442 cm
HL_FiBwInletPlumbing := h_l(Q_Fi, innerD(ND_FiManTrunk, 2), L_InletPlumbing4, K_El90 + K_PipeEnt, Nu_Water, E_Pvc) + HL_Manifold(Q_Fi, ND_FiManTrunk, L_FiManTrunk, 3*K_SEFi, Nu_Water, E_Pvc, 3) + HL_Manifold(Q_Fi/(N_FiManBranch*2), ND_FiManBranch, L_FiManBranchAve, Pi_VenaContractaOrifice, Nu_Water, E_Pvc, L_FiManBranchAve/B_FiManSlot) + HL_FiBwSlot = 0.0809686 m
HL_FiBwTotalSS := h_l(Q_Fi, innerD(ND_FiManTrunk, 2), L_InletPlumbing4, K_El90 + K_PipeEnt, Nu_Water, E_Pvc) + HL_FiBwSlot + HL_Manifold(Q_Fi, ND_FiManTrunk, L_FiManTrunk, 3*K_SEFi, Nu_Water, E_Pvc, 3) + HL_Manifold(Q_Fi/(N_FiManBranch*2), ND_FiManBranch, L_FiManBranchAve, Pi_VenaContractaOrifice, Nu_Water, E_Pvc, L_FiManBranchAve/B_FiManSlot) + HL_FiBwSS + HL_FiBwDrain = 1.30651 m
Rho_FiFluidized := Rho_H2O*ε_FiSand*Pi_FiFluidized + Rho_FiSand*(1 - ε_FiSand)/Pi_FiFluidized
H_FiOverfluidized := H_FiSand*Pi_FiFluidized + H_FiFluidizedBedVariation + H_FiInactiveLayer = 1.93932 m
# This safety is pretty tight but  H_FiOverfluidized is a huge over estimate.Moreover the fluidization is by layers so the H_FiOverfluidized calculation accounts for the full sand bed height .
Z_FiBwDrainSafety := (Z_BwDrain - outerradius(ND_Fi.BwDrain) - Z_FiBody) - H_FiOverfluidized = -8.17153 cm
# Elevations, Entrance and Exit Tanks, Pipe Stub Heights and Orifice Control for Flow Distribution
# Fi Height
Z_FiTop := H_FiBodyPipe + H_FiCap + BallValveLength(ND_FiAirRelValve) = 2.03603 m
# Elevation of Inlet of Pipe Stub 4 (bottommost inlet/inlet during backwash)
# A maximum of geometric (tank placement) and hydraulic (Backwash HL) constraints
Z_FiInlet4 := max(S_FiInlet4 + H_FiSand + ConRadius(ND_FiManTrunk) + S_TanktoInlet + CouplingLength(ND_FiManTrunk), Z_FiBwExit + HL_FiBwTotalSS) = 1.52907 m
# Elevation of Entrance and Exit Tanks
Z_FiEntTank := Z_FiInlet4 - CouplingLength(ND_FiManTrunk) = 1.43636 m  # Height of the bottom of the tank (top surface of the plastic plate)
Z_FiExitTank := Z_FiEntTank = 1.43636 m
(Z_FiBwExit + HL_FiBwTotalSS) - Z_FiEntTank = -0.144235 m
# Water depth in entrance tank during backwash:
HW_BwEntTank := max(CouplingLength(ND_FiManTrunk) + Headloss_weir(Q_Fi, innerdiameter(ND_FiManTrunk, PS_Fi)), (Z_FiBwExit + HL_FiBwTotalSS) - Z_FiEntTank) = 13.3436 cm
# So if our backwash headloss estimates are correct, there is a free surface in the backwash inlet during bw, at Z_FiBwExit + HL_FiBwTotalSS = 1.29213 m.from the filter body bottom
# Elevation of Inlet Tank Pipe Stubs
HL_InitiationSFLayer := 10 cm
# Assume this is the safety factor associated with initiating backwash for 2 layers (40cm) of sand bed each time in an incremental manner.
H_FiInlet4 := CouplingLength(ND_FiManTrunk) = 0.09271 m
H_FiInlet3 := max(CouplingLength(ND_FiManTrunk) + HL_InitiationSFLayer, Z_FiBwExit + HL_FiBwTotalSS + HL_InitiationSFLayer - Z_FiEntTank) = 19.271 cm
# Elevation of the top of the 3rd pipe stub (serving layers 4 and 5)
H_FiInlet2 := H_FiInlet3 + HL_InitiationSFLayer = 29.271 cm
# Maximum of geometric (at least 10 cm above Bw Stub) and Hydraulic (Lowest inlet should be above backwash initiation water level) constraints. I.e., the minimum height of the stub is 10 cm above Bw Stub
H_FiInlet1 := H_FiInlet2 + HL_InitiationSFLayer = 39.271 cm
# Size of Distribution Pipe, Elevation of Outlet Tank Pipe Stubs
# The waste pipe has 3 functions 1) increasing water levels to ensure air release (height must be above air valve)
# 2) draining the exit tank (pipe is fully removed)
# 3) filter to waste (pipe is below outlet distribution flow, but still high enough to ensure all inlets are submerged)
H_FiOutletDist := H_FiInlet1 = 39.271 cm  # this ensures all inlets are submerged at low flows
H_FiOutletAirRemoval := Z_FiTop - Z_FiExitTank = 59.967 cm  # this is the tallest section on the waste pipe
L_FiOutletDistPipe := H_FiOutletDist - 2*CouplingLength(ND_FiManTrunk) + 2*SocketDepth(ND_FiManTrunk)  # lower pipe length; coupling is glued to the lower pipe
L_FiOutletDistAirRelease := H_FiOutletAirRemoval - H_FiOutletDist + SocketDepth(ND_FiManTrunk) = 0.25296 m
# upper pipe length; section to be added during air release
HL_FiOutletDistTarget := 10 cm
H_FiOutletWaste := H_FiOutletDist - HL_FwdFiltrationTotal/2  # this ensures all inlets are submerged at low flows
L_FiOutletWastePipe := H_FiOutletWaste - 2*(CouplingLength(ND_FiManTrunk) - SocketDepth(ND_FiManTrunk))  # lower pipe length; coupling is glued to the lower pipe
L_FiOutletWasteAirRelease := H_FiOutletAirRemoval - H_FiOutletWaste + SocketDepth(ND_FiManTrunk)  # upper pipe length; section to be added during air release
# This is the height of the pipe that is provided with the filter to be added on to the Dist outlet when air needs to be removed from the column. Attaching this pipe at the end of each day will also prevent the filter from draining, and help maintain airtightness in case of fabrication issues
# A coupling should be glued to this removable pipe. We should include holders for these pieces on the side of the tanks/filter
ND_FiOutletDist := D_pipeschedule(Q_Fi, PS_Default, HL_FiOutletDistTarget, Z_FiExitTank, Nu_Water, E_Pvc, K_PipeEnt) = 1.5 in
ND_FiOutletWaste := ND_FiOutletDist
# Elevation and design of Flow Control Weir and Orifices to divide flow between multiple LFSRSFs
Z_FiInletOrifices := Z_FiExitTank + H_FiOutletDist + HL_FwdFiltrationTotal + HL_FiDirty + H_Freefall/2 = 2.42893 m  # center of orifice
H_FiInletOrifices := Z_FiInletOrifices - Z_FiEntTank = 99.2563 cm
HL_FiInletOrificesTarget := 5 cm
A_FiInletOrificesTarget := A_orifice(HL_FiInletOrificesTarget, Pi_VenaContractaOrifice, Q_Fi) = 12.8651 cm^2
10*cm/(3 m) = 3.33333 %
D_FiInletOrifices := 20 mm
A_FiInletOrifices := π*D_FiInletOrifices^2/4
N_FiInletOrifices := round(A_FiInletOrificesTarget/A_FiInletOrifices) = 4
# check:
S_FiInletOrifices := innerdiameter(ND_FiInletOrificePipe, PS_Fi)*π/N_FiInletOrifices = 0.0412348 m
S_BetweenOrifices := S_FiInletOrifices - D_FiInletOrifices = 2.12348 cm
# need to be spaced to avoid splashing into non-backwashing inlets
HL_FiInletOrifices := (Q_Fi/(Pi_VenaContractaOrifice*N_FiInletOrifices*A_FiInletOrifices))^2*1/(2*g) = 5.24051 cm
# freeboard over the inlet pipe so that the water doesnt spill out
L_FiInletOrificePipe := H_FiInletOrifices + HL_FiInletOrifices + H_PlantFreeboard + H_FiCap + SocketDepth(ND_FiInletWeir) + CapHeight(ND_FiInletWeir) - CapThickness(ND_FiInletWeir) - CouplingLength(ND_FiInletOrificePipe) + SocketDepth(ND_FiInletOrificePipe) = 1.23749 m
H_FiInletWeir := H_FiInletOrifices + HL_FiInletOrifices = 1.04497 m
# Check for Jet coming out of inlet weir:
# Make only a portion of the weir removable instead of the entire weir (easier to handle).This variable is the Height of portion of inlet weir that is non removable. Must be able to accomodate an FTA and CouplingLength-SocketDepth underneath.
(Q_Fi/(π*innerdiameter(ND_FiInletWeir, 2)^2/4))^2/(2*g) = 0.0486928 cm
L_FiInletWeirRemovable := max(H_FiInletWeir/2, 2*CouplingLength(ND_FiInletWeir) - SocketDepth(ND_FiInletWeir)) = 52.2484 cm
L_FiInletWeirBottom := H_FiInletWeir - L_FiInletWeirRemovable - (CouplingLength(ND_FiInletWeir) - 2*SocketDepth(ND_FiInletWeir))
HL_FiInletWeir := Headloss_weir(Q_Fi, 2*π*outerdiameter(ND_FiInletWeir)/2) = 1.1303 cm  # So jet shouldn't be a problem
# Final Tank Heights
ND_FiInletDrain := ND_FiOutletWaste
H_FiExitTank := H_FiOutletAirRemoval + H_PlantFreeboard/2 = 0.64967 m
Z_FiExitTankTop := Z_FiExitTank + H_FiExitTank = 2.08603 m
H_FiInletDrain := H_FiInletWeir + Headloss_weir(Q_Fi, 2*π*outerdiameter(ND_FiInletWeir)/2) + 1 cm = 1.06627 m
H_FiEntTank := H_FiInletDrain + H_PlantFreeboard = 1.16627 m
Z_FiEntTankTop := Z_FiEntTank + H_FiEntTank = 2.60263 m
# Height of the filter wrt the bottom of the filter body
H_FiEntTankTop := Z_FiEntTankTop - Z_Floor = 2.71469 m
# Height of the filter wrt the plant floor
# Sand Drain
# The Sand Drain is section of flexible tubing connected to the bottom of the filter at Z.SandDrain. The flex tubing connects to a section of rigid pipe (beginning at Z.SandDrainRigid) that is clamped to the side of the filter
L_FiSandDrainFlex := Ceil(Z_FiEntTank/2 + 30 cm, 5 cm) = 1.05 m  # 30 cm to provide curvature
Z_SandDrainRigid := Z_FiEntTank/2 = 0.718181 m
H_FiSandDrainRigid := Ceil(Z_FiEntTankTop - Z_FiEntTank/2, 1 cm) = 1.89 m
L_FiSandDrainTotal := L_FiSandDrainFlex + H_FiSandDrainRigid = 2.94 m
# Low Flow Stacked Rapid Sand Filter  -- AutoCAD Drawings
# AutoCAD References
# AutoCAD drawing programs:
# Translators:
# These are the codes that take MathCAD outputs and create AutoCAD scripts that are used to draw the plant (formerly Basics)
# [reference: MtoATranslators.xmcd]
# The wrapped MtoA translator contains the functions that the user will want to access. These functions will draw pieces with full functionality - specifying the location, dimension, and orientation of the object. Also, it contains layer control and subtraction capabilities for grouped objects.
# [reference: MtoATranslatorsWrapped.xmcd]
# Drawing functions:
# [reference: PlumbingF May.xmcd]
UnionLength(ND) := CouplingLength(ND)
UnionSocketDepth(ND) := UnionLength(ND)/3
TALength(ND) := 2*SocketDepth(ND) + 3 cm  # Tank Adaptor (Male slip to male threaded). Drawn as a section of pipe right now
# Filter Body
L_FiBodySegmentBottom := S_FiInlet4 + H_FiLayer*6 + ConRadius(ND_FiManTrunk) + 0.6*H_Gasket = 1.37122 m
L_FiBodySegmentTop := H_FiBodyPipe - L_FiBodySegmentBottom = 0.628777 m
FiPipeBottom_Origin := [0; 0; H_FiCap] = [0; 0; 0.01] m  # same as bottom cap origin
FiPipeTop_Origin := FiPipeBottom_Origin + [0; 0; L_FiBodySegmentBottom]
FiTopCap_Origin := [0; 0; H_FiBodyPipe + H_FiCap] + FiPipeBottom_Origin  # origin of top side of cap
FiEntTank_Origin := [
    -sin(AN_FiTanks)*(outerdiameter(ND_FiEntTank)/2 + outerdiameter(ND_FiExitTank)/2 + S_FiTanks);
    cos(AN_FiTanks)*(outerdiameter(ND_FiEntTank)/2 + outerdiameter(ND_FiExitTank)/2 + S_FiTanks);
    Z_FiEntTank
] = [-0.285899; 0.408306; 1.43636] m
FiExitTank_OriginY := FiEntTank_Origin[1] + 0.5*outerdiameter(ND_FiEntTank) - 0.5*outerdiameter(ND_FiExitTank) = 0.433706 m
FiExitTank_Origin := [FiExitTank_OriginY/tan(90 deg - AN_FiTanks); FiExitTank_OriginY; Z_FiEntTank]
FiAirRelValveTA_Origin := FiTopCap_Origin + [0; 0; BallValveSocket(ND_FiAirRelValve)]
FiAirRelValve_Origin := FiAirRelValveTA_Origin
FiSpacerLyr := layer_new("FiTankSpacer", red)
FiUpperSpacer := BoxF([FiEntTank_Origin[0]; FiEntTank_Origin[1]; -H_FiCap - 1.5*H_Gasket + FiTopCap_Origin[2]], [FiExitTank_Origin[0]; FiPipeTop_Origin[1]; -2*H_FiCap - 1.5*H_Gasket + FiTopCap_Origin[2]], [0; 0; 0]*deg)
FiLowerSpacer := BoxF([FiEntTank_Origin[0]; FiEntTank_Origin[1]; 1.5*H_Gasket + FiPipeTop_Origin[2]], [FiExitTank_Origin[0]; FiPipeTop_Origin[1]; 1.5*H_Gasket + H_FiCap + FiPipeTop_Origin[2]], [0; 0; 0]*deg)
FiSpacerFrz := FreezeLayer("FiTankSpacer")
LeftCut := BoxF([FiPipeTop_Origin[0]; FiPipeTop_Origin[1]; FiTopCap_Origin[2]], [
    FiPipeTop_Origin[0] - (FiPipeTop_Origin[0] - FiEntTank_Origin[0]);
    FiPipeTop_Origin[1] + (FiPipeTop_Origin[0] - FiEntTank_Origin[0])/sin(AN_FiTanks);
    FiPipeTop_Origin[2]
], [AN_FiTanks; 0; 0])
RightCut := BoxF([FiPipeTop_Origin[0]; FiPipeTop_Origin[1]; FiTopCap_Origin[2]], [
    FiPipeTop_Origin[0] + FiPipeTop_Origin[0] - FiEntTank_Origin[0];
    FiPipeTop_Origin[1] + (FiPipeTop_Origin[0] - FiEntTank_Origin[0])/sin(AN_FiTanks);
    FiPipeTop_Origin[2]
], [-AN_FiTanks; 0; 0])
SubtractSpacerCuts := SubtractF(["FiTankSpacer"], "DeleteMe")
FiSpacer := stack(FiSpacerLyr, FiUpperSpacer, FiLowerSpacer, FiSpacerFrz, LeftCut, RightCut, GroupDelete, SubtractSpacerCuts)
FiSpacerBarsLyr := layer_new("FiTankSpacerBars", purple)
FiSpacerBar1 := CylinderSUBF([
    0;
    0.5*outerdiameter(ND_FiPipe) + 2 cm + 0.5*outerdiameter(ND_FiEntTank);
    1.5*H_Gasket + FiPipeTop_Origin[2]
], 0.25 in, (-1.5*H_Gasket + FiTopCap_Origin[2] - H_FiCap) - (1.5*H_Gasket + FiPipeTop_Origin[2]), [0; 90]*deg, ["FiTankSpacer"])
FiSpacerBar2 := CylinderSUBF([-4 cm; 0.5*outerdiameter(ND_FiPipe) + 5 cm; 1.5*H_Gasket + FiPipeTop_Origin[2]], 0.25 in, (-1.5*H_Gasket + FiTopCap_Origin[2] - H_FiCap) - (1.5*H_Gasket + FiPipeTop_Origin[2]), [0; 90]*deg, ["FiTankSpacer"])
FiSpacerBar3 := CylinderSUBF([4 cm; 0.5*outerdiameter(ND_FiPipe) + 5 cm; 1.5*H_Gasket + FiPipeTop_Origin[2]], 0.25 in, (-1.5*H_Gasket + FiTopCap_Origin[2] - H_FiCap) - (1.5*H_Gasket + FiPipeTop_Origin[2]), [0; 90]*deg, ["FiTankSpacer"])
FiSpacerBarsFrz := FreezeLayer("FiTankSpacerBars")
FiSpacerBars := stack(FiSpacerBarsLyr, FiSpacerBar1, FiSpacerBar2, FiSpacerBar3, FiSpacerBarsFrz)
FiCapLyr := layer_new("FiBodyCaps", red)
FiTopCap := CylinderF(FiPipeBottom_Origin, outerdiameter(ND_FiPipe)*0.5, H_FiCap, [0; 270]*deg)
FiBottomCap := CylinderF(FiTopCap_Origin, outerdiameter(ND_FiPipe)*0.5, H_FiCap, [0; 270]*deg)
FiCapFrz := FreezeLayer("FiBodyCaps")
FiCaps := stack(FiCapLyr, FiTopCap, FiBottomCap, FiCapFrz)
FiAirRelValveLyr := layer_new("FiAirRelValve", yellow)
FiAirRelValveTADraw := PipeSUBF(FiAirRelValveTA_Origin, TALength(ND_FiAirRelValve), [0; -90]*deg, ND_FiAirRelValve, PS_Fi, ["FiBodyCaps"])
FiAirRemValveDraw := stack(view("ba"), InsertDwg(BallValveDwg, [-FiAirRelValve_Origin[0]; FiAirRelValve_Origin[2]; -FiAirRelValve_Origin[1]], ND_FiAirRelValve, -90 deg), view("t"))
FiAirRelValveFrz := FreezeLayer("FiAirRelValve")
FiAirRelValve := stack(FiAirRelValveLyr, FiAirRelValveTADraw, FiAirRemValveDraw, FiAirRelValveFrz)
FiBodyLyr := layer_new("FiBody", blue3)
FiBodyBottom := PipeF(FiPipeBottom_Origin, L_FiBodySegmentBottom, [0; 90]*deg, ND_FiPipe, PS_Fi)
FiBodyTop := PipeSUBF(FiPipeTop_Origin, L_FiBodySegmentTop, [0; 90]*deg, ND_FiPipe, PS_Fi, ["FiTankSpacer"])
FiBodyFrz := FreezeLayer("FiBody")
FiBody := stack(FiBodyLyr, FiBodyBottom, FiBodyTop, FiBodyFrz)
FiGasketLyr := layer_new("RubberGasket", grey)
UpperGasketOuter := CylinderF(FiTopCap_Origin, outerdiameter(ND_FiPipe)*0.5 + T_Gasket/2, H_Gasket, [0; 270]*deg)
MiddleGasketOuter := CylinderF(FiPipeBottom_Origin + [0; 0; L_FiBodySegmentBottom + H_Gasket/2], outerdiameter(ND_FiPipe)*0.5 + T_Gasket/2, H_Gasket, [0; 270]*deg)
LowerGasketOuter := CylinderF(FiPipeBottom_Origin + [0; 0; H_Gasket - H_FiCap], outerdiameter(ND_FiPipe)*0.5 + T_Gasket/2, H_Gasket, [0; 270]*deg)
FiGasketFrz := FreezeLayer("RubberGasket")
GasketCut := CylinderF(FiTopCap_Origin + [0; 0; zc], outerdiameter(ND_FiPipe)*0.5, H_FiBodyPipe + 2*H_FiCap + 2*zc, [0; 270]*deg)
SubtractGasket := SubtractF(["RubberGasket"], "DeleteMe")
FiGasket := stack(FiGasketLyr, UpperGasketOuter, MiddleGasketOuter, LowerGasketOuter, FiGasketFrz, GasketCut, GroupDelete, SubtractGasket)
FiBody := stack(FiCaps, FiAirRelValve, FiSpacer, FiSpacerBars, FiBody, FiGasket)
# Filter Entrance Tank
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FiEntTank_Origin = [-0.285899; 0.408306; 1.43636] m
Radius_Inlet := ConRadius(ND_FiInletWeir) + ((innerdiameter(ND_FiEntTank, PS_Fi)/2 - ConRadius(ND_FiInletWeir))/2)
FiInlet1FTA_Origin := FiEntTank_Origin + [
    cos(AN_FiTanks - 15 deg)*Radius_Inlet;
    sin(AN_FiTanks - 15 deg)*Radius_Inlet;
    -SocketDepth(ND_FiManTrunk) + CouplingLength(ND_FiManTrunk)
]
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FiInlet2FTA_Origin := FiEntTank_Origin + [
    cos(AN_FiTanks + 225/3*deg)*Radius_Inlet;
    sin(AN_FiTanks + 225/3*deg)*Radius_Inlet;
    -SocketDepth(ND_FiManTrunk) + CouplingLength(ND_FiManTrunk)
]
FiInlet4FTA_Origin := FiEntTank_Origin + [
    cos(AN_FiTanks + 225 deg)*Radius_Inlet;
    sin(AN_FiTanks + 225 deg)*Radius_Inlet;
    -SocketDepth(ND_FiManTrunk) + CouplingLength(ND_FiManTrunk)
]
FiInlet3FTA_Origin := FiEntTank_Origin + [
    cos(AN_FiTanks + 2*225/3*deg)*Radius_Inlet;
    sin(AN_FiTanks + 2*225/3*deg)*Radius_Inlet;
    -SocketDepth(ND_FiManTrunk) + CouplingLength(ND_FiManTrunk)
]
SocketDepth(ND_FiManTrunk) = 4.6 cm
AN_FiInletDrainFTA := AN_FiTanks + (225 + (360 - 225)/2)*deg
FiInletDrainFTA_Origin := FiEntTank_Origin + [
    cos(AN_FiInletDrainFTA)*Radius_Inlet;
    sin(AN_FiInletDrainFTA)*Radius_Inlet;
    -SocketDepth(ND_FiInletDrain) + CouplingLength(ND_FiInletDrain)
]
FiInletWeirCoupling_Origin := FiEntTank_Origin + [0; 0; H_FiInletWeir - L_FiInletWeirRemovable] = [-0.285899; 0.408306; 1.95885] m
FiInletWeirFTA_Origin := FiEntTank_Origin + [0; 0; -SocketDepth(ND_FiInletWeir) + CouplingLength(ND_FiInletWeir)]
FiInlet1MTA_Origin := [FiInlet1FTA_Origin[0]; FiInlet1FTA_Origin[1]; FiEntTank_Origin[2] - H_FiCap]
FiInlet2MTA_Origin := [FiInlet2FTA_Origin[0]; FiInlet2FTA_Origin[1]; FiEntTank_Origin[2] - H_FiCap]
FiInlet3MTA_Origin := [FiInlet3FTA_Origin[0]; FiInlet3FTA_Origin[1]; FiEntTank_Origin[2] - H_FiCap]
FiInlet4MTA_Origin := [FiInlet4FTA_Origin[0]; FiInlet4FTA_Origin[1]; FiEntTank_Origin[2] - H_FiCap]
FiInletDrainMTA_Origin := [FiInletDrainFTA_Origin[0]; FiInletDrainFTA_Origin[1]; FiEntTank_Origin[2] - H_FiCap]
FiInletWeirMTA_Origin := FiEntTank_Origin + [0; 0; -H_FiCap]
FiInletWeirCap_Origin := FiInletWeirMTA_Origin + [0; 0; -SocketDepth(ND_FiInletWeir) - (CapHeight(ND_FiInletWeir) - CapThickness(ND_FiInletWeir))]
FiInletOrificePipeMTA_Origin := FiInletWeirCap_Origin + [0; 0; -CapThickness(ND_FiInletWeir)]
FiInletOrificePipeFTA_Origin := FiInletWeirCap_Origin + [0; 0; CouplingLength(ND_FiInletOrificePipe) - SocketDepth(ND_FiInletOrificePipe)]
L_FiInlet1Pipe := H_FiInlet1 - (CouplingLength(ND_FiManTrunk) - SocketDepth(ND_FiManTrunk)) = 0.346 m
L_FiInlet2Pipe := H_FiInlet2 - (CouplingLength(ND_FiManTrunk) - SocketDepth(ND_FiManTrunk)) = 0.246 m
L_FiInlet3Pipe := H_FiInlet3 - (CouplingLength(ND_FiManTrunk) - SocketDepth(ND_FiManTrunk)) = 0.146 m
L_FiInletDrainPipe := H_FiInletDrain - (CouplingLength(ND_FiInletDrain) - SocketDepth(ND_FiInletDrain))
L_FiInletOrificePipe = 1.23749 m
FiInletWeirElbow_Origin := FiInletOrificePipeMTA_Origin + [0; 0; -2*SocketDepth(ND_FiInletOrificePipe)]
AN_FiInletWeirElbow := -(180 deg - ((AN_FiTanks + 225/3*deg) + (AN_FiTanks - 15 deg))/2) = -115 deg
FiEntTankBodyLyr := layer_new("FiEntTankBody", blue3)
FiEntTankBodyDraw := PipeSUBF(FiEntTank_Origin, H_FiEntTank, [0; 90]*deg, ND_FiEntTank, PS_Fi, ["FiTankSpacer"])
FiEntTankBodyFrz := FreezeLayer("FiEntTankBody")
FiEntTankBody := stack(FiEntTankBodyLyr, FiEntTankBodyDraw, FiEntTankBodyFrz)
FiEntTankCapLyr := layer_new("FiEntTankCap", red)
FiEntTankCapDraw := CylinderF(FiEntTank_Origin, outerdiameter(ND_FiEntTank)*0.5, H_FiCap, [0; 270]*deg)
FiEntTankCapFrz := FreezeLayer("FiEntTankCap")
FiEntTankCap := stack(FiEntTankCapLyr, FiEntTankCapDraw, FiEntTankCapFrz)
FiEntTankFittingsLyr := layer_new("FiEntTankFittingsPlu", green)
FiInlet1FTA := CouplingF(FiInlet1FTA_Origin, [0; 270]*deg, ND_FiManTrunk, PS_Fi)
FiInlet2FTA := CouplingF(FiInlet2FTA_Origin, [0; 270]*deg, ND_FiManTrunk, PS_Fi)
FiInlet3FTA := CouplingF(FiInlet3FTA_Origin, [0; 270]*deg, ND_FiManTrunk, PS_Fi)
FiInlet4FTA := CouplingF(FiInlet4FTA_Origin, [0; 270]*deg, ND_FiManTrunk, PS_Fi)
FiInletDrainFTA := CouplingF(FiInletDrainFTA_Origin, [0; 270]*deg, ND_FiInletDrain, PS_Fi)
FiInletOrificePipeFTA := CouplingF(FiInletOrificePipeFTA_Origin, [0; 270]*deg, ND_FiInletOrificePipe, PS_Fi)
FiInletWeirCoupling := CouplingF(FiInletWeirCoupling_Origin, [0; 270]*deg, ND_FiInletWeir, PS_Fi)
FiInletWeirFTA := CouplingF(FiInletWeirFTA_Origin, [0; 270]*deg, ND_FiInletWeir, PS_Fi)
FiInletWeirElbow := ElbowF(FiInletWeirElbow_Origin, [0; 0; 270]*deg, ND_FiManTrunk, PS_Fi)
FiInletWeirElbowRot := Rotate3DLast(FiInletWeirElbow_Origin, "z", AN_FiInletWeirElbow)
FiEntTankFittingsFrz := FreezeLayer("FiEntTankFittingsPlu")
FiEntTankFittings := stack(FiEntTankFittingsLyr, FiInlet1FTA, FiInlet2FTA, FiInlet3FTA, FiInlet4FTA, FiInletDrainFTA, FiInletOrificePipeFTA, FiInletWeirCoupling, FiInletWeirFTA, FiInletWeirElbow, FiInletWeirElbowRot, FiEntTankFittingsFrz)
FiInletWeirCapLyr := layer_new("FiInletWeirCapPlu", red)
FiInletWeirCap := CapF(FiInletWeirCap_Origin, [0; 90]*deg, ND_FiInletWeir)
FiInletWeirCapFrz := FreezeLayer("FiInletWeirCapPlu")
FiEntTankOrCap := stack(FiInletWeirCapLyr, FiInletWeirCap, FiInletWeirCapFrz)
FiEntTankMTALyr := layer_new("FiEntTankMTAPlu", yellow)
FiInlet1MTA := MaleAdapterSUBF(FiInlet1MTA_Origin, [0; 90]*deg, ND_FiManTrunk, PS_Fi, ["FiEntTankCap"])
FiInlet2MTA := MaleAdapterSUBF(FiInlet2MTA_Origin, [0; 90]*deg, ND_FiManTrunk, PS_Fi, ["FiEntTankCap"])
FiInlet3MTA := MaleAdapterSUBF(FiInlet3MTA_Origin, [0; 90]*deg, ND_FiManTrunk, PS_Fi, ["FiEntTankCap"])
FiInlet4MTA := MaleAdapterSUBF(FiInlet4MTA_Origin, [0; 90]*deg, ND_FiManTrunk, PS_Fi, ["FiEntTankCap"])
FiInletDrainMTA := MaleAdapterSUBF(FiInletDrainMTA_Origin, [0; 90]*deg, ND_FiInletDrain, PS_Fi, ["FiEntTankCap"])
FiInletOrificePipeMTA := MaleAdapterSUBF(FiInletOrificePipeMTA_Origin, [0; 90]*deg, ND_FiInletOrificePipe, PS_Fi, ["FiInletWeirCapPlu"])
FiInletWeirMTA := MaleAdapterSUBF(FiInletWeirMTA_Origin, [0; 90]*deg, ND_FiInletWeir, PS_Fi, ["FiEntTankCap"])
FiEntTankMTAFrz := FreezeLayer("FiEntTankMTAPlu")
FiEntTankMTA := stack(FiEntTankMTALyr, FiInlet1MTA, FiInlet2MTA, FiInlet3MTA, FiInlet4MTA, FiInletDrainMTA, FiInletWeirMTA, FiInletOrificePipeMTA, FiEntTankMTAFrz)
FiEntTankPipeLyr := layer_new("FiEntTankPipePlu", blue)
FiInlet1PipeDraw := PipeF(FiInlet1FTA_Origin, L_FiInlet1Pipe, [0; 90]*deg, ND_FiManTrunk, PS_Fi)
FiInlet2PipeDraw := PipeF(FiInlet2FTA_Origin, L_FiInlet2Pipe, [0; 90]*deg, ND_FiManTrunk, PS_Fi)
FiInlet3PipeDraw := PipeF(FiInlet3FTA_Origin, L_FiInlet3Pipe, [0; 90]*deg, ND_FiManTrunk, PS_Fi)
FiInletDrainPipeDraw := PipeF(FiInletDrainFTA_Origin, L_FiInletDrainPipe, [0; 90]*deg, ND_FiInletDrain, PS_Fi)
FiInletWeirPipeDraw := PipeF(FiInletWeirFTA_Origin, L_FiInletWeirBottom, [0; 90]*deg, ND_FiInletWeir, PS_Fi)
FiInletWeirRemovablePipeDraw := PipeF(FiInletWeirCoupling_Origin, L_FiInletWeirRemovable, [0; 90]*deg, ND_FiInletWeir, PS_Fi)
FiInletOrificeWeirCapPipeDraw := PipeF(FiInletWeirCap_Origin, SocketDepth(ND_FiInletWeir) + CapHeight(ND_FiInletWeir), [0; 90]*deg, ND_FiInletWeir, PS_Fi)
FiEntTankPipeFrz := FreezeLayer("FiEntTankPipePlu")
FiEntTankOrPipeLyr := layer_new("FiEntTankOrPipePlu", blue)
FiInletOrificePipeDraw := PipeF(FiInletOrificePipeFTA_Origin, L_FiInletOrificePipe, [0; 90]*deg, ND_FiInletOrificePipe, PS_Fi)
FiEntTankOrPipeFrz := FreezeLayer("FiEntTankOrPipePlu")
FiEntTankPipe := stack(FiEntTankPipeLyr, FiInlet1PipeDraw, FiInlet2PipeDraw, FiInlet3PipeDraw, FiInletDrainPipeDraw, FiInletWeirPipeDraw, FiInletWeirRemovablePipeDraw, FiInletOrificeWeirCapPipeDraw, FiEntTankPipeFrz, FiEntTankOrPipeLyr, FiInletOrificePipeDraw, FiEntTankOrPipeFrz)
FiEntOrificeSub1 := CylinderF([FiEntTank_Origin[0]; FiEntTank_Origin[1]; Z_FiInletOrifices], 0.5*D_FiInletOrifices, 0.5*outerdiameter(ND_FiInletWeir) + 1 cm, [AN_FiInletWeirElbow - 180 deg; 0])
FiEntOrificeSub2 := CylinderF([FiEntTank_Origin[0]; FiEntTank_Origin[1]; Z_FiInletOrifices], 0.5*D_FiInletOrifices, 0.5*outerdiameter(ND_FiInletWeir) + 1 cm, [AN_FiInletDrainFTA; 0])
FiEntOrificeSub3 := CylinderF([FiEntTank_Origin[0]; FiEntTank_Origin[1]; Z_FiInletOrifices], 0.5*D_FiInletOrifices, 0.5*outerdiameter(ND_FiInletWeir) + 1 cm, [AN_FiTanks + 225/2*deg; 0])
FiEntOrificeSub4 := CylinderF([FiEntTank_Origin[0]; FiEntTank_Origin[1]; Z_FiInletOrifices], 0.5*D_FiInletOrifices, 0.5*outerdiameter(ND_FiInletWeir) + 1 cm, [AN_FiTanks + 5*225/6*deg; 0])
GroupFiEntOrificeSub := GroupAll("DeleteMe")
SubtractFiEntOrificeSub := SubtractF(["FiEntTankOrPipePlu"], "DeleteMe")
FiEntTankOrifices := stack(FiEntOrificeSub1, FiEntOrificeSub2, FiEntOrificeSub3, FiEntOrificeSub4, GroupFiEntOrificeSub, SubtractFiEntOrificeSub)
FiGasketThaw := ThawMultiple(["RubberGasket"])
FiEtGasketOuter := CylinderF(FiEntTank_Origin - [0; 0; H_FiCap], outerdiameter(ND_FiEntTank)*0.5 + T_Gasket/2, H_Gasket, [0; 90]*deg)
FiGasketFrz := FreezeLayer("RubberGasket")
EtGasketCut := CylinderF(FiEntTank_Origin + [0; 0; -zc - H_FiCap], outerdiameter(ND_FiEntTank)*0.5, H_Gasket + 2*zc, [0; 90]*deg)
FiEtGasket := stack(FiGasketThaw, layer_set("RubberGasket"), FiEtGasketOuter, FiGasketFrz, EtGasketCut, GroupDelete, SubtractGasket)
FiEntTank := stack(FiEntTankBody, FiEtGasket, FiEntTankCap, FiEntTankFittings, FiEntTankOrCap, FiEntTankMTA, FiEntTankPipe, FiEntTankOrifices)
# Filter Exit Tank
FiExitTank_Origin = [0.303684; 0.433706; 1.43636] m
# Ensures that the tangent of the extrance and exit tanks that is parallel to the x axis is the same, i.e., the hoseclamp holding the tanks is parallel to the x axis.
FiExitTankCap_Origin := FiExitTank_Origin
# origin of top side of cap
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Radius_Outlet := innerdiameter(ND_FiExitTank, PS_Fi)/2 - (ConRadius(ND_FiManTrunk) + 1.5 cm)
FiOutlet2FTA_Origin := FiExitTank_Origin + [cos(-90 deg)*Radius_Outlet; sin(-90 deg)*Radius_Outlet; SocketDepth(ND_FiManTrunk)]
FiOutlet3FTA_Origin := FiExitTank_Origin + [
    cos((-90 + 360/5)*deg)*Radius_Outlet;
    sin((-90 + 360/5)*deg)*Radius_Outlet;
    SocketDepth(ND_FiManTrunk)
]
FiOutletDistFTA_Origin := FiExitTank_Origin + [
    cos((-90 + 2*360/5)*deg)*Radius_Outlet;
    sin((-90 + 2*360/5)*deg)*Radius_Outlet;
    CouplingLength(ND_FiOutletDist) - SocketDepth(ND_FiOutletDist)
]
FiOutlet1FTA_Origin := FiExitTank_Origin + [
    cos((-90 + 3*360/5)*deg)*Radius_Outlet;
    sin((-90 + 3*360/5)*deg)*Radius_Outlet;
    SocketDepth(ND_FiManTrunk)
]
FiOutletWasteFTA_Origin := FiExitTank_Origin + [
    cos((-90 + 4*360/5)*deg)*Radius_Outlet;
    sin((-90 + 4*360/5)*deg)*Radius_Outlet;
    CouplingLength(ND_FiOutletWaste) - SocketDepth(ND_FiOutletWaste)
]
FiOutlet1MTA_Origin := FiOutlet1FTA_Origin + [0; 0; -SocketDepth(ND_FiManTrunk) - H_FiCap]
FiOutlet2MTA_Origin := FiOutlet2FTA_Origin + [0; 0; -SocketDepth(ND_FiManTrunk) - H_FiCap]
FiOutlet3MTA_Origin := FiOutlet3FTA_Origin + [0; 0; -SocketDepth(ND_FiManTrunk) - H_FiCap]
FiOutletDistMTA_Origin := [FiOutletDistFTA_Origin[0]; FiOutletDistFTA_Origin[1]; FiExitTank_Origin[2] - H_FiCap]
FiOutletWasteMTA_Origin := [FiOutletWasteFTA_Origin[0]; FiOutletWasteFTA_Origin[1]; FiExitTank_Origin[2] - H_FiCap]
FiOutletDistCoupling_Origin := FiOutletDistFTA_Origin + [0; 0; L_FiOutletDistPipe + CouplingLength(ND_FiOutletDist) - 2*SocketDepth(ND_FiOutletDist)]
FiOutletWasteCoupling_Origin := [0; 0; L_FiOutletWastePipe + CouplingLength(ND_FiOutletDist) - 2*SocketDepth(ND_FiOutletDist)] + FiOutletWasteFTA_Origin
FiExitTankBodyLyr := layer_new("FiExitTankBody", blue3)
FiExitTankBodyDraw := PipeSUBF(FiExitTank_Origin, H_FiExitTank, [0; 90]*deg, ND_FiExitTank, PS_Fi, ["FiTankSpacer"])
FiExitTankBodyFrz := FreezeLayer("FiExitTankBody")
FiExitTankBody := stack(FiExitTankBodyLyr, FiExitTankBodyDraw, FiExitTankBodyFrz)
FiExitTankCapLyr := layer_new("FiExitTankCap", red)
FiExitTankCapDraw := CylinderF(FiExitTankCap_Origin, outerdiameter(ND_FiExitTank)*0.5, H_FiCap, [0; 270]*deg)
FiExitTankCapFrz := FreezeLayer("FiExitTankCap")
FiExitTankCap := stack(FiExitTankCapLyr, FiExitTankCapDraw, FiExitTankCapFrz)
FiExitTankFTALyr := layer_new("FiExitTankFTAPlu", green)
FiOutlet1FTA := CouplingF(FiOutlet1FTA_Origin, [0; 90]*deg, ND_FiManTrunk, PS_Fi)
FiOutlet2FTA := CouplingF(FiOutlet2FTA_Origin, [0; 90]*deg, ND_FiManTrunk, PS_Fi)
FiOutlet3FTA := CouplingF(FiOutlet3FTA_Origin, [0; 90]*deg, ND_FiManTrunk, PS_Fi)
FiOutletDistFTA := CouplingF(FiOutletDistFTA_Origin, [0; 270]*deg, ND_FiOutletDist, PS_Fi)
FiOutletWasteFTA := CouplingF(FiOutletWasteFTA_Origin, [0; 270]*deg, ND_FiOutletWaste, PS_Fi)
FiOutletDistCoupling := CouplingF(FiOutletDistCoupling_Origin, [0; 270]*deg, ND_FiOutletDist, PS_Fi)
FiOutletWasteCoupling := CouplingF(FiOutletWasteCoupling_Origin, [0; 270]*deg, ND_FiOutletWaste, PS_Fi)
FiExitTankFTAFrz := FreezeLayer("FiExitTankFTAPlu")
FiExitTankFTA := stack(FiExitTankFTALyr, FiOutlet1FTA, FiOutlet2FTA, FiOutlet3FTA, FiOutletDistFTA, FiOutletWasteFTA, FiOutletDistCoupling, FiOutletWasteCoupling, FiExitTankFTAFrz)
FiExitTankMTALyr := layer_new("FiExitTankMTAPlu", yellow)
FiOutlet1MTA := MaleAdapterSUBF(FiOutlet1MTA_Origin, [0; 90]*deg, ND_FiManTrunk, PS_Fi, ["FiExitTankCap"])
FiOutlet2MTA := MaleAdapterSUBF(FiOutlet2MTA_Origin, [0; 90]*deg, ND_FiManTrunk, PS_Fi, ["FiExitTankCap"])
FiOutlet3MTA := MaleAdapterSUBF(FiOutlet3MTA_Origin, [0; 90]*deg, ND_FiManTrunk, PS_Fi, ["FiExitTankCap"])
FiOutletDistMTA := MaleAdapterSUBF(FiOutletDistMTA_Origin, [0; 90]*deg, ND_FiOutletDist, PS_Fi, ["FiExitTankCap"])
FiOutletWasteMTA := MaleAdapterSUBF(FiOutletWasteMTA_Origin, [0; 90]*deg, ND_FiOutletWaste, PS_Fi, ["FiExitTankCap"])
FiExitTankMTAFrz := FreezeLayer("FiExitTankMTAPlu")
FiExitTankMTA := stack(FiExitTankMTALyr, FiOutlet1MTA, FiOutlet2MTA, FiOutlet3MTA, FiOutletDistMTA, FiOutletWasteMTA, FiExitTankMTAFrz)
FiExitTankPipeLyr := layer_new("FiExitTankPipesPlu", blue)
FiOutletDistPipe := PipeF(FiOutletDistFTA_Origin, L_FiOutletDistPipe, [0; 90]*deg, ND_FiOutletDist, PS_Fi)
FiOutletWastePipe := PipeF(FiOutletWasteFTA_Origin, L_FiOutletWastePipe, [0; 90]*deg, ND_FiOutletWaste, PS_Fi)
FiDistAirRemovalPipe := PipeF(FiOutletDistCoupling_Origin, L_FiOutletDistAirRelease, [0; 90]*deg, ND_FiOutletDist, PS_Fi)
FiWasteAirRemovalPipe := PipeF(FiOutletWasteCoupling_Origin, L_FiOutletWasteAirRelease, [0; 90]*deg, ND_FiOutletDist, PS_Fi)
FiExitTankPipeFrz := FreezeLayer("FiExitTankPipesPlu")
FiExitTankPipe := stack(FiExitTankPipeLyr, FiOutletDistPipe, FiOutletWastePipe, FiDistAirRemovalPipe, FiWasteAirRemovalPipe, FiExitTankPipeFrz)
FiExGasketOuter := CylinderF(FiExitTank_Origin - [0; 0; H_FiCap], outerdiameter(ND_FiExitTank)*0.5 + T_Gasket/2, H_Gasket, [0; 90]*deg)
ExitGasketCut := CylinderF(FiExitTank_Origin - [0; 0; zc + H_FiCap], outerdiameter(ND_FiExitTank)*0.5, H_Gasket + 2*zc, [0; 90]*deg)
FiEtGasket := stack(FiGasketThaw, layer_set("RubberGasket"), FiExGasketOuter, FiGasketFrz, ExitGasketCut, GroupDelete, SubtractGasket)
FiExitTank := stack(FiExitTankBody, FiEtGasket, FiExitTankCap, FiExitTankFTA, FiExitTankMTA, FiExitTankPipe)
# Inlet Plumbing
H_FiInlet1Pipe1 := SocketDepth(ND_FiManTrunk) + UnionSocketDepth(ND_FiManTrunk)
FiInlet1Union1_Origin := FiInlet1MTA_Origin + [0; 0; -SocketDepth(ND_FiManTrunk) - 0.5*UnionLength(ND_FiManTrunk)]
FiInlet1Tee1_Origin := [FiInlet1MTA_Origin[0] + ShortTeeLength(ND_FiManTrunk); FiInlet1MTA_Origin[1]; S_FiInlet4]
FiInlet1Reducer_Origin := FiInlet1Tee1_Origin + [-ShortTeeLength(ND_FiManTrunk); 0; -ShortTeeLength(ND_FiManTrunk) - 2*SocketDepth(ND_FiManTrunk)]
FiInlet1DrainElbow_Origin := FiInlet1Reducer_Origin + [0; 0; -3*SocketDepth(ND_RvsFlowDrain)]
FiInlet1DrainValve_Origin := FiInlet1DrainElbow_Origin + [
    0;
    ElbowRadius(ND_RvsFlowDrain) + SocketDepth(ND_RvsFlowDrain) + BallValveSocket(ND_RvsFlowDrain);
    -ElbowRadius(ND_RvsFlowDrain)
]
TALengthNew(ND) := ND*10.36*cm/(2 in)  # threaded adapter is 10.36 cm for sched 80 2in pipe, scale accordingly
TAFixedLength(ND) := ND*5.4*cm/(2 in)
# the section of the threaded adapter where the flange is fixed is 5.4 cm for 2in (this length includes flange length)
# put this section on the outside
TAFixedFlangeLength(ND) := ND*5.4*cm/(2 in)
FiInlet1TA_Origin := [
    FiPipeBottom_Origin[0];
    FiPipeBottom_Origin[1] + outerdiameter(ND_FiPipe)/2 - (TALengthNew(ND_FiManTrunk) - TAFixedLength(ND_FiManTrunk));
    S_FiInlet4 + 6*H_FiLayer
]
FiInlet1TUnion_Origin := FiInlet1TA_Origin + [
    0;
    TALengthNew(ND_FiManTrunk) - UnionSocketDepth(ND_FiManTrunk) + 0.5*UnionLength(ND_FiManTrunk);
    0
]
FiInlet1MTABody_Origin := FiInlet1TUnion_Origin + [0; 0.5*UnionLength(ND_FiManTrunk); 0]
FiInlet1Elbow1_Origin := [
    FiInlet1MTABody_Origin[0];
    FiInlet1Union1_Origin[1] - ElbowRadius(ND_FiManTrunk);
    FiInlet1MTABody_Origin[2]
]
H_FiInlet1Pipe2 := FiInlet1Union1_Origin[2] - 0.5*UnionLength(ND_FiManTrunk) + UnionSocketDepth(ND_FiManTrunk) - FiInlet1Tee1_Origin[2] - ShortTeeLength(ND_FiManTrunk) = 1.19422 m
H_FiInlet1Pipe3 := (FiPipeBottom_Origin[0] - FiInlet1MTA_Origin[0]) - ShortTeeLength(ND_FiManTrunk) - ElbowRadius(ND_FiManTrunk) = 0.130686 m
FiInlet1Elbow2_Origin := [
    FiInlet1Elbow1_Origin[0];
    FiInlet1Elbow1_Origin[1] + ElbowRadius(ND_FiManTrunk);
    FiInlet1Tee1_Origin[2] + ElbowRadius(ND_FiManTrunk)
]
H_FiInlet1Pipe4 := FiInlet1Elbow1_Origin[2] - FiInlet1Elbow2_Origin[2] - ElbowRadius(ND_FiManTrunk)
H_FiInlet1Pipe5 := FiInlet1Elbow1_Origin[1] - FiInlet1MTABody_Origin[1] = 0.135826 m
FiInlet1PipesLyr := layer_new("FiInlet1PipesPlu", blue)
FiInlet1Pipe1 := PipeF(FiInlet1MTA_Origin, H_FiInlet1Pipe1, [0; -90]*deg, ND_FiManTrunk, PS_Fi)
FiInlet1Pipe2 := PipeF(FiInlet1Union1_Origin + [0; 0; UnionSocketDepth(ND_FiManTrunk) - 0.5*UnionLength(ND_FiManTrunk)], H_FiInlet1Pipe2, [0; -90]*deg, ND_FiManTrunk, PS_Fi)
FiInlet1Pipe3 := PipeF(FiInlet1Elbow2_Origin + [-ElbowRadius(ND_FiManTrunk); 0; -ElbowRadius(ND_FiManTrunk)], H_FiInlet1Pipe3, [0; 0]*deg, ND_FiManTrunk, PS_Fi)
FiInlet1Pipe4 := PipeF(FiInlet1Elbow1_Origin + [0; ElbowRadius(ND_FiManTrunk); -ElbowRadius(ND_FiManTrunk)], H_FiInlet1Pipe4, [0; -90]*deg, ND_FiManTrunk, PS_Fi)
FiInlet1Pipe5 := PipeF(FiInlet1Elbow1_Origin, H_FiInlet1Pipe5, [90; 0]*deg, ND_FiManTrunk, PS_Fi)
FiInlet1DrainNipple := PipeF(FiInlet1Reducer_Origin, 2*SocketDepth(ND_FiManTrunk), [0; 90]*deg, ND_FiManTrunk, PS_Fi)
FiInlet1PipesFrz := FreezeLayer("FiInlet1PipesPlu")
FiInlet1Pipes := stack(FiInlet1PipesLyr, FiInlet1Pipe1, FiInlet1Pipe2, FiInlet1Pipe3, FiInlet1Pipe4, FiInlet1Pipe5, FiInlet1DrainNipple, FiInlet1PipesFrz)
FiInlet1FittingsLyr := layer_new("FiInlet1FittingsPlu", green)
FiInlet1Tee1 := TeeF(FiInlet1Tee1_Origin, [270; 0; 90]*deg, ND_FiManTrunk, PS_Fi)
FiInlet1Elbow1 := ElbowF(FiInlet1Elbow1_Origin, [0; -90; 0]*deg, ND_FiManTrunk, PS_Fi)
FiInlet1Reducer := reducerF(FiInlet1Reducer_Origin, [0; 270; 0]*deg, ND_FiManTrunk, ND_RvsFlowDrain, SocketDepth(ND_RvsFlowDrain), PS_Fi)
FiInlet1DrainElbow := ElbowF(FiInlet1DrainElbow_Origin, [270; 90; 0]*deg, ND_RvsFlowDrain, PS_Fi)
FiInlet1RvsFlowDrain := InsertDwg(BallValveDwg, FiInlet1DrainValve_Origin, ND_RvsFlowDrain, -90 deg)
FiInlet1Elbow2 := ElbowF(FiInlet1Elbow2_Origin, [0; 0; -90]*deg, ND_FiManTrunk, PS_Fi)
FiInlet1MTABody := MaleAdapterF(FiInlet1MTABody_Origin, [90; 0]*deg, ND_FiManTrunk, PS_Fi)
FiInlet1FittingsFrz := FreezeLayer("FiInlet1FittingsPlu")
FiInlet1UnionsLyr := layer_new("FiInlet1UnionsPlu", green)
FiInlet1Union1 := UnionF(FiInlet1Union1_Origin, [0; -90]*deg, ND_FiManTrunk, PS_Fi)
FiInlet1TUnion := UnionF(FiInlet1TUnion_Origin, [90; 0]*deg, ND_FiManTrunk, PS_Fi)
FiInlet1UnionsFrz := FreezeLayer("FiInlet1UnionsPlu")
FiInlet1Fittings := stack(FiInlet1FittingsLyr, FiInlet1Tee1, FiInlet1Elbow1, FiInlet1DrainElbow, FiInlet1Elbow2, FiInlet1MTABody, FiInlet1Reducer, FiInlet1RvsFlowDrain, FiInlet1FittingsFrz, FiInlet1UnionsLyr, FiInlet1Union1, FiInlet1TUnion, FiInlet1UnionsFrz)
FiInlet1TALyr := layer_new("FiInlet1TAPlu", yellow)
FiInlet1TADraw := PipeSUBF(FiInlet1TA_Origin, TALengthNew(ND_FiManTrunk), [270; 0]*deg, ND_FiManTrunk, PS_Fi, ["FiBody"])
FiInlet1TAFrz := FreezeLayer("FiInlet1TAPlu")
FiInlet1TA := stack(FiInlet1TALyr, FiInlet1TADraw, FiInlet1TAFrz)
FiInlet1All := stack(FiInlet1Pipes, FiInlet1Fittings, FiInlet1TA)
H_FiInlet2Pipe1 := SocketDepth(ND_FiManTrunk) + UnionSocketDepth(ND_FiManTrunk)
FiInlet2Union1_Origin := FiInlet2MTA_Origin + [0; 0; -SocketDepth(ND_FiManTrunk) - 0.5*UnionLength(ND_FiManTrunk)]
FiInlet2Tee1_Origin := [
    FiInlet2MTA_Origin[0] + ShortTeeLength(ND_FiManTrunk);
    FiInlet2MTA_Origin[1];
    FiInlet1Tee1_Origin[2]
] = [-0.300721; 0.509749; 0.102231] m
FiInlet2Reducer_Origin := FiInlet2Tee1_Origin + [-ShortTeeLength(ND_FiManTrunk); 0; -ShortTeeLength(ND_FiManTrunk) - 2*SocketDepth(ND_FiManTrunk)]
FiInlet2DrainElbow_Origin := FiInlet2Reducer_Origin + [0; 0; -3*SocketDepth(ND_RvsFlowDrain)]
FiInlet2DrainValve_Origin := FiInlet2DrainElbow_Origin + [
    -(ElbowRadius(ND_RvsFlowDrain) + SocketDepth(ND_RvsFlowDrain) + BallValveSocket(ND_RvsFlowDrain));
    0;
    -ElbowRadius(ND_RvsFlowDrain)
]
H_FiInlet2Pipe2 := FiInlet2MTA_Origin[2] - UnionLength(ND_FiManTrunk) - SocketDepth(ND_FiManTrunk) + UnionSocketDepth(ND_FiManTrunk) - FiInlet2Tee1_Origin[2] - ShortTeeLength(ND_FiManTrunk)
H_FiInlet2Pipe3 := 2*SocketDepth(ND_FiManTrunk)
FiInlet2Elbow1_Origin := FiInlet2Tee1_Origin + [H_FiInlet2Pipe3; 0; 0]
H_FiInlet2Pipe4 := 4*H_FiLayer - 2*ElbowRadius(ND_FiManTrunk) = 0.736659 m
FiInlet2Elbow2_Origin := FiInlet2Elbow1_Origin + [ElbowRadius(ND_FiManTrunk); 0; H_FiInlet2Pipe4 + ElbowRadius(ND_FiManTrunk)]
H_FiInlet2HorizNipple := sqrt((FiPipeBottom_Origin[0] - FiInlet2MTA_Origin[0])^2 + (FiPipeBottom_Origin[1] - FiInlet2MTA_Origin[1])^2) - (0.5*outerdiameter(ND_FiPipe) + ShortTeeLength(ND_FiManTrunk) + 2*ElbowRadius(ND_FiManTrunk) + 2*SocketDepth(ND_FiManTrunk) + TAFixedLength(ND_FiManTrunk) + UnionLength(ND_FiManTrunk) - UnionSocketDepth(ND_FiManTrunk)) = 14.8199 cm
FiInlet2MTABody_Origin := FiInlet2Elbow2_Origin + [H_FiInlet2HorizNipple + ElbowRadius(ND_FiManTrunk); 0; ElbowRadius(ND_FiManTrunk)]
TAFixedLength(ND_FiManTrunk) = 0.054 m
FiInlet2Union2_Origin := FiInlet2MTABody_Origin + [UnionLength(ND_FiManTrunk)/2; 0; 0]
H_FiInlet2Pipe5 := UnionSocketDepth(ND_FiManTrunk) + SocketDepth(ND_FiManTrunk)
H_FiInlet2Pipe6 := 2*SocketDepth(ND_FiManTrunk)
FiInlet2TA_Origin := FiInlet2Union2_Origin + [UnionLength(ND_FiManTrunk)/2 - UnionSocketDepth(ND_FiManTrunk) + TALengthNew(ND_FiManTrunk); 0; 0]
AN_FiInlet2Rot := -atan(sqrt((FiPipeBottom_Origin[1] - FiInlet2Union1_Origin[1])^2)/sqrt((FiPipeBottom_Origin[0] - FiInlet2Union1_Origin[0])^2))
FiInlet2PipesLyr := layer_new("FiInlet2PipesPlu", blue)
FiInlet2Pipe1 := PipeF(FiInlet2MTA_Origin, H_FiInlet2Pipe1, [0; -90]*deg, ND_FiManTrunk, PS_Fi)
FiInlet2Pipe2 := PipeF(FiInlet2Union1_Origin + [0; 0; -UnionLength(ND_FiManTrunk)/2 + UnionSocketDepth(ND_FiManTrunk)], H_FiInlet2Pipe2, [0; -90]*deg, ND_FiManTrunk, PS_Fi)
FiInlet2Pipe3 := PipeF(FiInlet2Tee1_Origin, H_FiInlet2Pipe3, [180; 0]*deg, ND_FiManTrunk, PS_Fi)
FiInlet2Pipe4 := PipeF(FiInlet2Elbow1_Origin + [ElbowRadius(ND_FiManTrunk); 0; ElbowRadius(ND_FiManTrunk)], H_FiInlet2Pipe4, [0; 90]*deg, ND_FiManTrunk, PS_Fi)
FiInlet2DrainNipple := PipeF(FiInlet2Reducer_Origin, 2*SocketDepth(ND_FiManTrunk), [0; 90]*deg, ND_FiManTrunk, PS_Fi)
FiInlet2HorizNipple := PipeF(FiInlet2MTABody_Origin, H_FiInlet2HorizNipple, [0; 0]*deg, ND_FiManTrunk, PS_Fi)
FiInlet2PipesFrz := FreezeLayer("FiInlet2PipesPlu")
FiInlet2Pipes := stack(FiInlet2PipesLyr, FiInlet2Pipe1, FiInlet2Pipe2, FiInlet2Pipe3, FiInlet2Pipe4, FiInlet2DrainNipple, FiInlet2HorizNipple, FiInlet2PipesFrz)
FiInlet2FittingsLyr := layer_new("FiInlet2FittingsPlu", green)
FiInlet2Tee1 := TeeF(FiInlet2Tee1_Origin, [270; 0; 90]*deg, ND_FiManTrunk, PS_Fi)
FiInlet2Elbow1 := ElbowF(FiInlet2Elbow1_Origin, [-90; 0; 90]*deg, ND_FiManTrunk, PS_Fi)
FiInlet2Elbow2 := ElbowF(FiInlet2Elbow2_Origin, [180; 0; -90]*deg, ND_FiManTrunk, PS_Fi)
FiInlet2Reducer := reducerF(FiInlet2Reducer_Origin, [0; 270; 0]*deg, ND_FiManTrunk, ND_RvsFlowDrain, SocketDepth(ND_RvsFlowDrain), PS_Fi)
FiInlet2DrainElbow := ElbowF(FiInlet2DrainElbow_Origin, [0; 0; 270 deg], ND_RvsFlowDrain, PS_Fi)
FiInlet2RvsFlowDrain := InsertDwg(BallValveDwg, FiInlet2DrainValve_Origin, ND_RvsFlowDrain, 0 deg)
FiInlet2MTABody := MaleAdapterF(FiInlet2MTABody_Origin, [180; 0]*deg, ND_FiManTrunk, PS_Fi)
FiInlet2FittingsFrz := FreezeLayer("FiInlet2FittingsPlu")
FiInlet2UnionsLyr := layer_new("FiInlet2UnionsPlu", green)
FiInlet2Union1 := UnionF(FiInlet2Union1_Origin, [0; -90]*deg, ND_FiManTrunk, PS_Fi)
FiInlet2Union2 := UnionF(FiInlet2Union2_Origin, [180; 0]*deg, ND_FiManTrunk, PS_Fi)
FiInlet2UnionsFrz := FreezeLayer("FiInlet2UnionsPlu")
FiInlet2Fittings := stack(FiInlet2FittingsLyr, FiInlet2Tee1, FiInlet2Elbow1, FiInlet2Elbow2, FiInlet2Reducer, FiInlet2DrainElbow, FiInlet2RvsFlowDrain, FiInlet2MTABody, FiInlet2FittingsFrz, FiInlet2UnionsLyr, FiInlet2Union1, FiInlet2Union2, FiInlet2UnionsFrz)
FiInlet2TALyr := layer_new("FiInlet2TAPlu", yellow)
FiInlet2TADraw := PipeF(FiInlet2TA_Origin, TALengthNew(ND_FiManTrunk), [0; 0]*deg, ND_FiManTrunk, PS_Fi)
FiInlet2TAFrz := FreezeLayer("FiInlet2TAPlu")
FiInlet2TA := stack(FiInlet2TALyr, FiInlet2TADraw, FiInlet2TAFrz)
FiInlet2PluThaw := ThawMultiple(["FiInlet2*Plu"])
RotateFiInlet2Plu := Rotate_All(FiInlet2FTA_Origin, AN_FiInlet2Rot)
FiInlet2PluFrz := FreezeMultiple(["FiInlet2*Plu"])
FiInlet2RotPl := stack(FiInlet2PluThaw, RotateFiInlet2Plu, FiInlet2PluFrz)
FiInlet2BodySub := CylinderF([FiPipeBottom_Origin[0]; FiPipeBottom_Origin[1]; FiInlet2TA_Origin[2]], 0.5*outerdiameter(ND_FiManTrunk), 0.5*outerdiameter(ND_FiPipe) + 2 cm, [AN_FiInlet2Rot; 0 deg])
GroupFiInlet2BodySub := GroupLast("DeleteMe")
SubtractFiInlet2Body := SubtractF(["FiBody"], "DeleteMe")
FiInlet2All := stack(FiInlet2Pipes, FiInlet2Fittings, FiInlet2TA, FiInlet2RotPl, FiInlet2BodySub, GroupFiInlet2BodySub, SubtractFiInlet2Body)
H_FiInlet4Pipe1 := SocketDepth(ND_FiManTrunk) + UnionSocketDepth(ND_FiManTrunk)
FiInlet4Union1_Origin := FiInlet4MTA_Origin + [0; 0; -SocketDepth(ND_FiManTrunk) - 0.5*UnionLength(ND_FiManTrunk)]
FiInlet4Tee1_Origin := [FiInlet4MTA_Origin[0] + ShortTeeLength(ND_FiManTrunk); FiInlet4MTA_Origin[1]; S_FiInlet4] = [-0.282545; 0.301993; 0.102231] m
FiInlet4Reducer_Origin := [
    FiInlet4Tee1_Origin[0] - ShortTeeLength(ND_FiManTrunk);
    FiInlet4Tee1_Origin[1];
    FiInlet1Reducer_Origin[2]
] = [-0.304645; 0.301993; -0.0118688] m
AN_FiInlet4Rot := -atan(sqrt((FiPipeBottom_Origin[1] - FiInlet4MTA_Origin[1])^2)/sqrt((FiPipeBottom_Origin[0] - FiInlet4MTA_Origin[0])^2))
FiInlet4DrainElbow_Origin := FiInlet4Reducer_Origin + [0; 0; -3*SocketDepth(ND_RvsFlowDrain)]
FiInlet4DrainValve_Origin := FiInlet4DrainElbow_Origin + [
    -(ElbowRadius(ND_RvsFlowDrain) + SocketDepth(ND_RvsFlowDrain) + BallValveSocket(ND_RvsFlowDrain))*cos(AN_FiInlet4Rot);
    (ElbowRadius(ND_RvsFlowDrain) + SocketDepth(ND_RvsFlowDrain) + BallValveSocket(ND_RvsFlowDrain))*sin(AN_FiInlet4Rot);
    -ElbowRadius(ND_RvsFlowDrain)
]
H_FiInlet4DrainNipple := FiInlet4Tee1_Origin[2] - FiInlet4DrainElbow_Origin[2] - ShortTeeLength(ND_FiManTrunk)
H_FiInlet4Pipe2 := FiInlet4Union1_Origin[2] - FiInlet4Tee1_Origin[2] - ShortTeeLength(ND_FiManTrunk) - (0.5*UnionLength(ND_FiManTrunk) - UnionSocketDepth(ND_FiManTrunk))
H_FiInlet4Pipe3 := sqrt((FiPipeBottom_Origin[0] - FiInlet4MTA_Origin[0])^2 + (FiPipeBottom_Origin[1] - FiInlet4MTA_Origin[1])^2) - (TAFixedLength(ND_FiManTrunk) + (UnionLength(ND_FiManTrunk) - UnionSocketDepth(ND_FiManTrunk)) + 0.5*outerdiameter(ND_FiPipe) + ShortTeeLength(ND_FiManTrunk)) = 0.12913 m
FiInlet4MTABody_Origin := [
    H_FiInlet4Pipe3 + ShortTeeLength(ND_FiManTrunk) + FiInlet4MTA_Origin[0];
    FiInlet4MTA_Origin[1];
    FiInlet4Tee1_Origin[2]
]
FiInlet4Union2_Origin := [UnionLength(ND_FiManTrunk)*0.5; 0; 0] + FiInlet4MTABody_Origin
FiInlet4TA_Origin := FiInlet4Union2_Origin + [
    0.5*UnionLength(ND_FiManTrunk) - UnionSocketDepth(ND_FiManTrunk) + TALengthNew(ND_FiManTrunk);
    0;
    0
]
FiInlet4PipesLyr := layer_new("FiInlet4PipesPlu", blue)
FiInlet4Pipe1 := PipeF(FiInlet4MTA_Origin, H_FiInlet4Pipe1, [0; -90]*deg, ND_FiManTrunk, PS_Fi)
FiInlet4Pipe2 := PipeF(FiInlet4Union1_Origin + [0; 0; -0.5*UnionLength(ND_FiManTrunk) + UnionSocketDepth(ND_FiManTrunk)], H_FiInlet4Pipe2, [0; -90]*deg, ND_FiManTrunk, PS_Fi)
FiInlet4Pipe3 := PipeF(FiInlet4MTABody_Origin, H_FiInlet4Pipe3, [0; 0]*deg, ND_FiManTrunk, PS_Fi)
FiInlet4DrainNipple := PipeF(FiInlet4Reducer_Origin, FiInlet4Tee1_Origin[2] - FiInlet4Reducer_Origin[2] - ShortTeeLength(ND_FiManTrunk), [0; 90]*deg, ND_FiManTrunk, PS_Fi)
FiInlet4PipesFrz := FreezeLayer("FiInlet4PipesPlu")
FiInlet4Pipes := stack(FiInlet4PipesLyr, FiInlet4Pipe1, FiInlet4Pipe2, FiInlet4Pipe3, FiInlet4DrainNipple, FiInlet4PipesFrz)
FiInlet4FittingsLyr := layer_new("FiInlet4FittingsPlu", green)
FiInlet4Tee1 := TeeF(FiInlet4Tee1_Origin, [270; 0; 90]*deg, ND_FiManTrunk, PS_Fi)
FiInlet4Reducer := reducerF(FiInlet4Reducer_Origin, [0; 270; 0]*deg, ND_FiManTrunk, ND_RvsFlowDrain, SocketDepth(ND_RvsFlowDrain), PS_Fi)
FiInlet4DrainElbow := ElbowF(FiInlet4DrainElbow_Origin, [0; AN_FiInlet4Rot; 270 deg], ND_RvsFlowDrain, PS_Fi)
FiInlet4MTABody := MaleAdapterF(FiInlet4MTABody_Origin, [180; 0; 0]*deg, ND_FiManTrunk, PS_Fi)
FiInlet4RvsFlowDrain := InsertDwg(BallValveDwg, FiInlet4DrainValve_Origin, ND_RvsFlowDrain, -AN_FiInlet4Rot)
FiInlet4FittingsFrz := FreezeLayer("FiInlet4FittingsPlu")
FiInlet4UnionsLyr := layer_new("FiInlet4UnionsPlu", green)
FiInlet4Union1 := UnionF(FiInlet4Union1_Origin, [0; -90]*deg, ND_FiManTrunk, PS_Fi)
FiInlet4Union2 := UnionF(FiInlet4Union2_Origin, [180; 0]*deg, ND_FiManTrunk, PS_Fi)
FiInlet4UnionsFrz := FreezeLayer("FiInlet4UnionsPlu")
FiInlet4Fittings := stack(FiInlet4FittingsLyr, FiInlet4Tee1, FiInlet4DrainElbow, FiInlet4MTABody, FiInlet4Reducer, FiInlet4RvsFlowDrain, FiInlet4FittingsFrz, FiInlet4UnionsLyr, FiInlet4Union1, FiInlet4Union2, FiInlet4UnionsFrz)
FiInlet4TALyr := layer_new("FiInlet4TAPlu", yellow)
FiInlet4TADraw := PipeF(FiInlet4TA_Origin, TALengthNew(ND_FiManTrunk), [0; 0]*deg, ND_FiManTrunk, PS_Fi)
FiInlet4TAFrz := FreezeLayer("FiInlet4TAPlu")
FiInlet4TA := stack(FiInlet4TALyr, FiInlet4TADraw, FiInlet4TAFrz)
FiInlet4PluThaw := ThawMultiple(["FiInlet4*Plu"])
RotateFiInlet4Plu := Rotate_All(FiInlet4FTA_Origin, AN_FiInlet4Rot)
FiInlet4PluFrz := FreezeMultiple(["FiInlet4*Plu"])
FiInlet4RotPl := stack(FiInlet4PluThaw, RotateFiInlet4Plu, FiInlet4PluFrz)
FiInlet4BodySub := CylinderF([FiPipeBottom_Origin[0]; FiPipeBottom_Origin[1]; FiInlet4TA_Origin[2]], 0.5*outerdiameter(ND_FiManTrunk), 0.5*outerdiameter(ND_FiPipe) + 2 cm, [AN_FiInlet4Rot; 0 deg])
GroupFiInlet4BodySub := GroupLast("DeleteMe")
SubtractFiInlet4Body := SubtractF(["FiBody"], "DeleteMe")
FiInlet4All := stack(FiInlet4Pipes, FiInlet4Fittings, FiInlet4TA, FiInlet4RotPl, FiInlet4BodySub, GroupFiInlet4BodySub, SubtractFiInlet4Body)
H_FiInlet3Pipe1 := SocketDepth(ND_FiManTrunk) + UnionSocketDepth(ND_FiManTrunk)
FiInlet3Union1_Origin := FiInlet3MTA_Origin + [0; 0; -SocketDepth(ND_FiManTrunk) - 0.5*UnionLength(ND_FiManTrunk)]
FiInlet3Tee1_Origin := [
    FiInlet3MTA_Origin[0];
    FiInlet3MTA_Origin[1] - ShortTeeLength(ND_FiManTrunk);
    FiInlet1Tee1_Origin[2]
] = [-0.393442; 0.376798; 0.102231] m
FiInlet3Reducer_Origin := FiInlet3Tee1_Origin + [0; ShortTeeLength(ND_FiManTrunk); -ShortTeeLength(ND_FiManTrunk) - 2*SocketDepth(ND_FiManTrunk)]
FiInlet3DrainElbow_Origin := FiInlet3Reducer_Origin + [0; 0; -3*SocketDepth(ND_RvsFlowDrain)]
FiInlet3DrainValve_Origin := FiInlet3DrainElbow_Origin + [
    -(ElbowRadius(ND_RvsFlowDrain) + SocketDepth(ND_RvsFlowDrain) + BallValveSocket(ND_RvsFlowDrain));
    0;
    -ElbowRadius(ND_RvsFlowDrain)
]
H_FiInlet3Pipe2 := FiInlet3MTA_Origin[2] - FiInlet3Tee1_Origin[2] - ShortTeeLength(ND_FiManTrunk) - H_FiInlet3Pipe1 - UnionSocketDepth(ND_FiManTrunk)
H_FiInlet3Pipe3 := -(FiPipeBottom_Origin[1] - FiInlet3MTA_Origin[1]) - ShortTeeLength(ND_FiManTrunk) - ElbowRadius(ND_FiManTrunk)
FiInlet3Elbow1_Origin := [
    FiInlet3MTA_Origin[0];
    FiInlet3MTA_Origin[1] - ShortTeeLength(ND_FiManTrunk);
    FiInlet3Tee1_Origin[2]
] + [0; -H_FiInlet3Pipe3; 0]
FiInlet3TA_Origin := [
    FiPipeBottom_Origin[0] - outerradius(ND_FiPipe) + (TALengthNew(ND_FiManTrunk) - TAFixedLength(ND_FiManTrunk));
    FiPipeBottom_Origin[1];
    S_FiInlet4 + 2*H_FiLayer
]
FiInlet3Union2_Origin := FiInlet3TA_Origin + [
    -TALengthNew(ND_FiManTrunk) + UnionSocketDepth(ND_FiManTrunk) - 0.5*UnionLength(ND_FiManTrunk);
    0;
    0
]
FiInlet3MTABody_Origin := FiInlet3Union2_Origin + [-(0.5*UnionLength(ND_FiManTrunk)); 0; 0]
FiInlet3Elbow2_Origin := [
    FiInlet3Elbow1_Origin[0];
    FiInlet3Elbow1_Origin[1] - ElbowRadius(ND_FiManTrunk);
    FiInlet3MTABody_Origin[2] - ElbowRadius(ND_FiManTrunk)
]
H_FiInlet3Pipe4 := FiInlet3Elbow2_Origin[2] - FiInlet3Elbow1_Origin[2] - ElbowRadius(ND_FiManTrunk)
H_FiInlet3Pipe5 := FiInlet3MTABody_Origin[0] + FiInlet3Elbow2_Origin[0] = -0.671173 m
H_FiInlet3Pipe6 := 2*SocketDepth(ND_FiManTrunk)
FiInlet3PipesLyr := layer_new("FiInlet3PipesPlu", blue)
FiInlet3Pipe1 := PipeF(FiInlet3MTA_Origin, H_FiInlet3Pipe1, [0; -90]*deg, ND_FiManTrunk, PS_Fi)
FiInlet3Pipe2 := PipeF(FiInlet3MTA_Origin + [0; 0; -H_FiInlet3Pipe1 - UnionSocketDepth(ND_FiManTrunk)], H_FiInlet3Pipe2, [0; -90]*deg, ND_FiManTrunk, PS_Fi)
FiInlet3Pipe3 := PipeF([
    FiInlet3MTA_Origin[0];
    FiInlet3MTA_Origin[1] - ShortTeeLength(ND_FiManTrunk);
    FiInlet3Tee1_Origin[2]
], H_FiInlet3Pipe3, [90; 0]*deg, ND_FiManTrunk, PS_Fi)
FiInlet3Pipe4 := PipeF(FiInlet3Elbow1_Origin + [0; -ElbowRadius(ND_FiManTrunk); ElbowRadius(ND_FiManTrunk)], H_FiInlet3Pipe4, [0; 90]*deg, ND_FiManTrunk, PS_Fi)
FiInlet3DrainNipple := PipeF(FiInlet3Reducer_Origin, 2*SocketDepth(ND_FiManTrunk), [0; 90]*deg, ND_FiManTrunk, PS_Fi)
FiInlet3PipesFrz := FreezeLayer("FiInlet3PipesPlu")
FiInlet3Pipes := stack(FiInlet3PipesLyr, FiInlet3Pipe1, FiInlet3Pipe2, FiInlet3Pipe3, FiInlet3Pipe4, FiInlet3DrainNipple, FiInlet3PipesFrz)
FiInlet3FittingsLyr := layer_new("FiInlet3FittingsPlu", green)
FiInlet3Tee1 := TeeF(FiInlet3Tee1_Origin, [180; 90; 0]*deg, ND_FiManTrunk, PS_Fi)
FiInlet3Elbow1 := ElbowF(FiInlet3Elbow1_Origin, [180; -90; 0]*deg, ND_FiManTrunk, PS_Fi)
FiInlet3Reducer := reducerF(FiInlet3Reducer_Origin, [0; 270; 0]*deg, ND_FiManTrunk, ND_RvsFlowDrain, SocketDepth(ND_RvsFlowDrain), PS_Fi)
FiInlet3DrainElbow := ElbowF(FiInlet3DrainElbow_Origin, [0; 0; 270]*deg, ND_RvsFlowDrain, PS_Fi)
FiInlet3RvsFlowDrain := InsertDwg(BallValveDwg, FiInlet3DrainValve_Origin, ND_RvsFlowDrain, 0 deg)
FiInlet3Elbow2 := ElbowF(FiInlet3Elbow2_Origin, [180; 0; -90]*deg, ND_FiManTrunk, PS_Fi)
FiInlet3MTABody := MaleAdapterF(FiInlet3MTABody_Origin, [180; 0]*deg, ND_FiManTrunk, PS_Fi)
FiInlet3FittingsFrz := FreezeLayer("FiInlet3FittingsPlu")
FiInlet3Fittings := stack(FiInlet3FittingsLyr, FiInlet3Tee1, FiInlet3Elbow1, FiInlet3Reducer, FiInlet3DrainElbow, FiInlet3RvsFlowDrain, FiInlet3Elbow2, FiInlet3MTABody, FiInlet3FittingsFrz)
FiInlet3UnionsLyr := layer_new("FiInlet3UnionsPlu", green)
FiInlet3Union1 := UnionF(FiInlet3Union1_Origin, [0; -90]*deg, ND_FiManTrunk, PS_Fi)
FiInlet3Union2 := UnionF(FiInlet3Union2_Origin, [180; 0]*deg, ND_FiManTrunk, PS_Fi)
FiInlet3UnionsFrz := FreezeLayer("FiInlet3UnionsPlu")
FiInlet3Unions := stack(FiInlet3UnionsLyr, FiInlet3Union1, FiInlet3Union2, FiInlet3UnionsFrz)
FiInlet3TALyr := layer_new("FiInlet3TAPlu", yellow)
FiInlet3TADraw := PipeSUBF(FiInlet3TA_Origin, TALengthNew(ND_FiManTrunk), [0; 0]*deg, ND_FiManTrunk, PS_Fi, ["FiBody"])
FiInlet3TAFrz := FreezeLayer("FiInlet3TAPlu")
FiInlet3TA := stack(FiInlet3TALyr, FiInlet3TADraw, FiInlet3TAFrz)
FiInlet3All := stack(FiInlet3Pipes, FiInlet3Fittings, FiInlet3Unions, FiInlet3TA)
FiInletPlumbing := stack(FiInlet1All, FiInlet2All, FiInlet3All, FiInlet4All)
# Outlet Plumbing
# OUTLET 3
FiOutlet3Union1_Origin := FiOutlet3MTA_Origin + [0; 0; -SocketDepth(ND_FiManTrunk) - 0.5*UnionLength(ND_FiManTrunk)]
H_FiOutlet3Pipe1 := SocketDepth(ND_FiManTrunk) + UnionSocketDepth(ND_FiManTrunk)
FiOutlet3Tee1_Origin := [FiOutlet3MTA_Origin[0]; FiOutlet3MTA_Origin[1] - ShortTeeLength(ND_FiManTrunk); S_FiInlet4]
FiOutlet3Reducer_Origin := [
    FiOutlet3Tee1_Origin[0];
    ShortTeeLength(ND_FiManTrunk) + FiOutlet3Tee1_Origin[1];
    FiInlet1Reducer_Origin[2]
]
FiOutlet3DrainElbow_Origin := FiOutlet3Reducer_Origin + [0; 0; -(3*SocketDepth(ND_RvsFlowDrain))]
FiOutlet3DrainValve_Origin := FiOutlet3DrainElbow_Origin + [
    ElbowRadius(ND_RvsFlowDrain) + SocketDepth(ND_RvsFlowDrain) + BallValveLength(ND_RvsFlowDrain) - BallValveSocket(ND_RvsFlowDrain);
    0;
    -ElbowRadius(ND_RvsFlowDrain)
]
H_FiOutlet3DrainNipple := (FiOutlet3Tee1_Origin[2] - FiOutlet3Reducer_Origin[2]) - ShortTeeLength(ND_FiManTrunk)
FiOutlet3Elbow1_Origin := [
    FiOutlet3MTA_Origin[0];
    FiPipeBottom_Origin[1];
    ElbowRadius(ND_FiManTrunk) + FiOutlet3Tee1_Origin[2]
]
H_FiOutlet3Pipe2 := FiOutlet3Union1_Origin[2] - FiOutlet3Tee1_Origin[2] - ShortTeeLength(ND_FiManTrunk) - (0.5*UnionLength(ND_FiManTrunk) - UnionSocketDepth(ND_FiManTrunk))
FiOutlet3Elbow2_Origin := [
    FiOutlet3Elbow1_Origin[0];
    FiOutlet3Elbow1_Origin[1];
    S_FiInlet4 + H_FiLayer - ElbowRadius(ND_FiManTrunk)
]
H_FiOutlet3Pipe3 := FiOutlet3Tee1_Origin[1] - FiOutlet3Elbow1_Origin[1] - ElbowRadius(ND_FiManTrunk)
H_FiOutlet3Pipe4 := FiOutlet3Elbow2_Origin[2] - FiOutlet3Elbow1_Origin[2] = 0.136659 m
H_FiOutlet3Pipe5 := FiOutlet3MTA_Origin[0] - FiPipeBottom_Origin[0] - (outerdiameter(ND_FiPipe)*0.5 + TAFixedLength(ND_FiPipe) + (UnionLength(ND_FiManTrunk) - UnionSocketDepth(ND_FiManTrunk)) + ElbowRadius(ND_FiManTrunk))
FiOutlet3MTABody_Origin := FiOutlet3Elbow2_Origin + [-ElbowRadius(ND_FiManTrunk) - 2*SocketDepth(ND_FiManTrunk); 0; ElbowRadius(ND_FiManTrunk)]
FiOutlet3TA_Origin := [
    FiPipeBottom_Origin[0] + outerradius(ND_FiPipe) + TAFixedLength(ND_FiManTrunk);
    FiOutlet3MTABody_Origin[1];
    FiOutlet3MTABody_Origin[2]
]
FiOutlet3Union2_Origin := FiOutlet3TA_Origin + [0.5*UnionLength(ND_FiManTrunk) - UnionSocketDepth(ND_FiManTrunk); 0; 0]
FiOutlet3PipesLyr := layer_new("FiOutlet3PipesPlu", blue)
FiOutlet3Pipe1 := PipeF(FiOutlet3MTA_Origin, H_FiOutlet3Pipe1, [0; -90]*deg, ND_FiManTrunk, PS_Fi)
FiOutlet3Pipe2 := PipeF(FiOutlet3Tee1_Origin + [0; ShortTeeLength(ND_FiManTrunk); ShortTeeLength(ND_FiManTrunk)], H_FiOutlet3Pipe2, [0; 90]*deg, ND_FiManTrunk, PS_Fi)
FiOutlet3Pipe3 := PipeF(FiOutlet3Tee1_Origin, H_FiOutlet3Pipe3, [90; 0]*deg, ND_FiManTrunk, PS_Fi)
FiOutlet3Pipe4 := PipeF(FiOutlet3Elbow2_Origin, H_FiOutlet3Pipe4, [0; -90]*deg, ND_FiManTrunk, PS_Fi)
FiOutlet3DrainNipple := PipeF(FiOutlet3Reducer_Origin, H_FiOutlet3DrainNipple, [0; 90]*deg, ND_FiManTrunk, PS_Fi)
FiOutlet3PipesFrz := FreezeLayer("FiOutlet3PipesPlu")
FiOutlet3Pipes := stack(FiOutlet3PipesLyr, FiOutlet3Pipe1, FiOutlet3Pipe2, FiOutlet3Pipe3, FiOutlet3Pipe4, FiOutlet3DrainNipple, FiOutlet3PipesFrz)
FiOutlet3FittingsLyr := layer_new("FiOutlet3FittingsPlu", green)
FiOutlet3Tee1 := TeeF(FiOutlet3Tee1_Origin, [180; 90; 0]*deg, ND_FiManTrunk, PS_Fi)
FiOutlet3Elbow1 := ElbowF(FiOutlet3Elbow1_Origin, [-90; 90; 0]*deg, ND_FiManTrunk, PS_Fi)
FiOutlet3Elbow2 := ElbowF(FiOutlet3Elbow2_Origin, [0; 0; 90]*deg, ND_FiManTrunk, PS_Fi)
FiOutlet3MTABody := MaleAdapterF(FiOutlet3MTABody_Origin, [0; 0; 0]*deg, ND_FiManTrunk, PS_Fi)
FiOutlet3Reducer := reducerF(FiOutlet3Reducer_Origin, [0; 270; 0]*deg, ND_FiManTrunk, ND_RvsFlowDrain, SocketDepth(ND_RvsFlowDrain), PS_Fi)
FiOutlet3DrainElbow := ElbowF(FiOutlet3DrainElbow_Origin, [180; 0; 90]*deg, ND_RvsFlowDrain, PS_Fi)
FiOutlet3RvsFlowDrain := InsertDwg(BallValveDwg, FiOutlet3DrainValve_Origin, ND_RvsFlowDrain, 0 deg)
FiOutlet3FittingsFrz := FreezeLayer("FiOutlet3FittingsPlu")
FiOutlet3UnionsLyr := layer_new("FiOutlet3UnionsPlu", green)
FiOutlet3Union1 := UnionF(FiOutlet3Union1_Origin, [0; -90]*deg, ND_FiManTrunk, PS_Fi)
FiOutlet3Union2 := UnionF(FiOutlet3Union2_Origin, [0; 0]*deg, ND_FiManTrunk, PS_Fi)
FiOutlet3UnionsFrz := FreezeLayer("FiOutlet3UnionsPlu")
FiOutlet3Fittings := stack(FiOutlet3FittingsLyr, FiOutlet3Tee1, FiOutlet3Elbow1, FiOutlet3Elbow2, FiOutlet3MTABody, FiOutlet3Reducer, FiOutlet3DrainElbow, FiOutlet3RvsFlowDrain, FiOutlet3FittingsFrz, FiOutlet3UnionsLyr, FiOutlet3Union1, FiOutlet3Union2, FiOutlet3UnionsFrz)
FiOutlet3TALyr := layer_new("FiOutlet3TAPlu", yellow)
FiOutlet3TADraw := PipeSUBF(FiOutlet3TA_Origin, TALengthNew(ND_FiManTrunk), [0; 0]*deg, ND_FiManTrunk, PS_Fi, ["FiBody"])
FiOutlet3TAFrz := FreezeLayer("FiOutlet3TAPlu")
FiOutlet3TA := stack(FiOutlet3TALyr, FiOutlet3TADraw, FiOutlet3TAFrz)
FiOutlet3All := stack(FiOutlet3Pipes, FiOutlet3Fittings, FiOutlet3TA)
# OUTLET 2
H_FiOutlet2Pipe1 := SocketDepth(ND_FiManTrunk) + UnionSocketDepth(ND_FiManTrunk)
AN_FiOutlet2Rot := -(90 deg + atan(sqrt((FiPipeBottom_Origin[0] - FiOutlet2MTA_Origin[0])^2)/sqrt((FiPipeBottom_Origin[1] - FiOutlet2MTA_Origin[1])^2)))
FiOutlet2Union1_Origin := FiOutlet2MTA_Origin + [0; 0; -SocketDepth(ND_FiManTrunk) - 0.5*UnionLength(ND_FiManTrunk)]
FiOutlet2Tee1_Origin := [
    FiOutlet2MTA_Origin[0] + ShortTeeLength(ND_FiManTrunk);
    FiOutlet2MTA_Origin[1];
    FiInlet1Tee1_Origin[2]
]
H_FiOutlet2Pipe2 := FiOutlet2MTA_Origin[2] - FiOutlet2Tee1_Origin[2] - ShortTeeLength(ND_FiManTrunk) - H_FiOutlet2Pipe1 - UnionSocketDepth(ND_FiManTrunk)
FiOutlet2Elbow1_Origin := FiOutlet2Tee1_Origin + [2*SocketDepth(ND_FiManTrunk); 0; 0]
H_FiOutlet2Pipe3 := 3*H_FiLayer - 2*ElbowRadius(ND_FiManTrunk)
FiOutlet2Elbow2_Origin := FiOutlet2Elbow1_Origin + [ElbowRadius(ND_FiManTrunk); 0; H_FiOutlet2Pipe3 + ElbowRadius(ND_FiManTrunk)]
FiOutlet2Reducer_Origin := [
    FiOutlet2Tee1_Origin[0] - ShortTeeLength(ND_FiManTrunk);
    FiOutlet2Tee1_Origin[1];
    FiInlet2Reducer_Origin[2]
]
FiOutlet2DrainElbow_Origin := FiOutlet2Reducer_Origin + [0; 0; -(3*SocketDepth(ND_RvsFlowDrain))]
FiOutlet2DrainValve_Origin := FiOutlet2DrainElbow_Origin + [
    (ElbowRadius(ND_RvsFlowDrain) + SocketDepth(ND_RvsFlowDrain) + BallValveSocket(ND_RvsFlowDrain))*cos(AN_FiOutlet2Rot);
    -(ElbowRadius(ND_RvsFlowDrain) + SocketDepth(ND_RvsFlowDrain) + BallValveSocket(ND_RvsFlowDrain))*sin(AN_FiOutlet2Rot);
    -ElbowRadius(ND_RvsFlowDrain)
]
H_FiOutlet2Pipe4 := sqrt((FiPipeBottom_Origin[0] - FiOutlet2FTA_Origin[0])^2 + (FiPipeBottom_Origin[1] - FiOutlet2FTA_Origin[1])^2) - (outerdiameter(ND_FiPipe)*0.5 + TAFixedLength(ND_FiManTrunk) + (UnionLength(ND_FiManTrunk) - UnionSocketDepth(ND_FiManTrunk)) + ShortTeeLength(ND_FiManTrunk) + 2*ElbowRadius(ND_FiManTrunk) + 2*SocketDepth(ND_FiManTrunk))
FiOutlet2MTABody_Origin := [H_FiOutlet2Pipe4 + ElbowRadius(ND_FiManTrunk); 0; ElbowRadius(ND_FiManTrunk)] + FiOutlet2Elbow2_Origin
FiOutlet2Union2_Origin := FiOutlet2MTABody_Origin + [UnionLength(ND_FiManTrunk)*0.5; 0; 0]
FiOutlet2TA_Origin := FiOutlet2Union2_Origin + [
    UnionLength(ND_FiManTrunk)*0.5 - UnionSocketDepth(ND_FiManTrunk) + TALengthNew(ND_FiManTrunk);
    0;
    0
]
FiOutlet2PipesLyr := layer_new("FiOutlet2PipesPlu", blue)
FiOutlet2Pipe1 := PipeF(FiOutlet2MTA_Origin, H_FiOutlet2Pipe1, [0; -90]*deg, ND_FiManTrunk, PS_Fi)
FiOutlet2Pipe2 := PipeF(FiOutlet2Tee1_Origin + [-ShortTeeLength(ND_FiManTrunk); 0; ShortTeeLength(ND_FiManTrunk)], H_FiOutlet2Pipe2, [0; 90]*deg, ND_FiManTrunk, PS_Fi)
FiOutlet2Pipe4 := PipeF(FiOutlet2Elbow1_Origin + [ElbowRadius(ND_FiManTrunk); 0; ElbowRadius(ND_FiManTrunk)], H_FiOutlet2Pipe3, [0; 90]*deg, ND_FiManTrunk, PS_Fi)
FiOutlet2Pipe5 := PipeF(FiOutlet2MTABody_Origin, H_FiOutlet2Pipe4, [0; 0]*deg, ND_FiManTrunk, PS_Fi)
FiOutlet2DrainNipple := PipeF(FiOutlet2Reducer_Origin, 2*SocketDepth(ND_FiManTrunk), [0; 90]*deg, ND_FiManTrunk, PS_Fi)
FiOutlet2PipesFrz := FreezeLayer("FiOutlet2PipesPlu")
FiOutlet2Pipes := stack(FiOutlet2PipesLyr, FiOutlet2Pipe1, FiOutlet2Pipe2, FiOutlet2Pipe4, FiOutlet2Pipe5, FiOutlet2DrainNipple, FiOutlet2PipesFrz)
FiOutlet2FittingsLyr := layer_new("FiOutlet2FittingsPlu", green)
FiOutlet2Tee1 := TeeF(FiOutlet2Tee1_Origin, [270; 0; 90]*deg, ND_FiManTrunk, PS_Fi)
FiOutlet2Elbow1 := ElbowF(FiOutlet2Elbow1_Origin, [-90; 0; 90]*deg, ND_FiManTrunk, PS_Fi)
FiOutlet2Elbow2 := ElbowF(FiOutlet2Elbow2_Origin, [180; 0; -90]*deg, ND_FiManTrunk, PS_Fi)
FiOutlet2MTABody := MaleAdapterF(FiOutlet2MTABody_Origin, [180; 0; 0]*deg, ND_FiManTrunk, PS_Fi)
FiOutlet2Reducer := reducerF(FiOutlet2Reducer_Origin, [0; 270; 0]*deg, ND_FiManTrunk, ND_RvsFlowDrain, SocketDepth(ND_RvsFlowDrain), PS_Fi)
FiOutlet2DrainElbow := ElbowF(FiOutlet2DrainElbow_Origin, [180 deg; -AN_FiOutlet2Rot; 90 deg], ND_RvsFlowDrain, PS_Fi)
FiOutlet2RvsFlowDrain := InsertDwg(BallValveDwg, FiOutlet2DrainValve_Origin, ND_RvsFlowDrain, -(AN_FiOutlet2Rot + 180 deg))
FiOutlet2FittingsFrz := FreezeLayer("FiOutlet2FittingsPlu")
FiOutlet2UnionsLyr := layer_new("FiOutlet2UnionsPlu", green)
FiOutlet2Union1 := UnionF(FiOutlet2Union1_Origin, [0; -90]*deg, ND_FiManTrunk, PS_Fi)
FiOutlet2Union2 := UnionF(FiOutlet2Union2_Origin, [180; 0]*deg, ND_FiManTrunk, PS_Fi)
FiOutlet2UnionsFrz := FreezeLayer("FiOutlet2UnionsPlu")
FiOutlet2Fittings := stack(FiOutlet2FittingsLyr, FiOutlet2Tee1, FiOutlet2Elbow1, FiOutlet2Elbow2, FiOutlet2MTABody, FiOutlet2Reducer, FiOutlet2DrainElbow, FiOutlet2RvsFlowDrain, FiOutlet2FittingsFrz, FiOutlet2UnionsLyr, FiOutlet2Union1, FiOutlet2Union2, FiOutlet2UnionsFrz)
FiOutlet2TALyr := layer_new("FiOutlet2TAPlu", yellow)
FiOutlet2TADraw := PipeSUBF(FiOutlet2TA_Origin, TALengthNew(ND_FiManTrunk), [0; 0]*deg, ND_FiManTrunk, PS_Fi, ["FiBody"])
FiOutlet2TAFrz := FreezeLayer("FiOutlet2TAPlu")
FiOutlet2TA := stack(FiOutlet2TALyr, FiOutlet2TADraw, FiOutlet2TAFrz)
FiOutlet2PluThaw := ThawMultiple(["FiOutlet2*Plu"])
RotateFiOutlet2Plu := Rotate_All(FiOutlet2FTA_Origin, AN_FiOutlet2Rot)
FiOutlet2PluFrz := FreezeMultiple(["FiOutlet2*Plu"])
FiOutlet2RotPl := stack(FiOutlet2PluThaw, RotateFiOutlet2Plu, FiOutlet2PluFrz)
FiOutlet2BodySub := CylinderF([FiPipeBottom_Origin[0]; FiPipeBottom_Origin[1]; FiOutlet2TA_Origin[2]], 0.5*outerdiameter(ND_FiManTrunk), 0.5*outerdiameter(ND_FiPipe) + 2 cm, [AN_FiOutlet2Rot; 0 deg])
GroupFiOutlet2BodySub := GroupLast("DeleteMe")
SubtractFiOutlet2Body := SubtractF(["FiBody"], "DeleteMe")
FiOutlet2All := stack(FiOutlet2Pipes, FiOutlet2Fittings, FiOutlet2TA, FiOutlet2RotPl, FiOutlet2BodySub, GroupFiOutlet2BodySub, SubtractFiOutlet2Body)
# OUTLET 1
H_FiOutlet1Pipe1 := SocketDepth(ND_FiManTrunk) + UnionSocketDepth(ND_FiManTrunk)
AN_FiOutlet1Rot := -(90 deg + atan(sqrt((FiPipeBottom_Origin[0] - FiOutlet1MTA_Origin[0])^2)/sqrt((FiPipeBottom_Origin[1] - FiOutlet1MTA_Origin[1])^2)))
FiOutlet1Union1_Origin := FiOutlet1MTA_Origin + [0; 0; -SocketDepth(ND_FiManTrunk) - 0.5*UnionLength(ND_FiManTrunk)] = [0.257765; 0.496909; 1.33401] m
FiOutlet1Tee1_Origin := [
    FiOutlet1MTA_Origin[0] + ShortTeeLength(ND_FiManTrunk);
    FiOutlet1MTA_Origin[1];
    FiInlet1Tee1_Origin[2]
]
H_FiOutlet1Pipe2 := FiOutlet1Union1_Origin[2] - FiOutlet1Tee1_Origin[2] - ShortTeeLength(ND_FiManTrunk) - (0.5*UnionLength(ND_FiManTrunk) - UnionSocketDepth(ND_FiManTrunk))
H_FiOutlet1Pipe3 := 2*SocketDepth(ND_FiManTrunk)
FiOutlet1Elbow1_Origin := [
    FiOutlet1Tee1_Origin[0] + 2*SocketDepth(ND_FiManTrunk);
    FiOutlet1MTA_Origin[1];
    FiOutlet1Tee1_Origin[2]
]
FiOutlet1Reducer_Origin := [
    FiOutlet1Tee1_Origin[0] - ShortTeeLength(ND_FiManTrunk);
    FiOutlet1Tee1_Origin[1];
    FiInlet1Reducer_Origin[2]
]
FiOutlet1DrainElbow_Origin := FiOutlet1Reducer_Origin + [0; 0; -(3*SocketDepth(ND_RvsFlowDrain))]
FiOutlet1DrainValve_Origin := FiOutlet1DrainElbow_Origin + [
    -(ElbowRadius(ND_RvsFlowDrain) + SocketDepth(ND_RvsFlowDrain) + BallValveSocket(ND_RvsFlowDrain));
    0;
    -ElbowRadius(ND_RvsFlowDrain)
]
H_FiOutlet1Pipe4 := 5*H_FiLayer - 2*ElbowRadius(ND_FiManTrunk)
FiOutlet1Elbow2_Origin := FiOutlet1Elbow1_Origin + [ElbowRadius(ND_FiManTrunk); 0; H_FiOutlet1Pipe4 + ElbowRadius(ND_FiManTrunk)]
H_FiOutlet1Pipe5 := sqrt((FiPipeBottom_Origin[0] - FiOutlet1MTA_Origin[0])^2 + (FiPipeBottom_Origin[1] - FiOutlet1MTA_Origin[1])^2) - (0.5*outerdiameter(ND_FiPipe) + ShortTeeLength(ND_FiManTrunk) + 2*ElbowRadius(ND_FiManTrunk) + 2*SocketDepth(ND_FiManTrunk) + TAFixedLength(ND_FiManTrunk) + (UnionLength(ND_FiManTrunk) - UnionSocketDepth(ND_FiManTrunk))) = 10.4614 cm
FiOutlet1MTABody_Origin := [H_FiOutlet1Pipe5 + ElbowRadius(ND_FiManTrunk); 0; ElbowRadius(ND_FiManTrunk)] + FiOutlet1Elbow2_Origin
FiOutlet1Union2_Origin := FiOutlet1MTABody_Origin + [UnionLength(ND_FiManTrunk)*0.5; 0; 0] = [0.586175; 0.496909; 1.10223] m
FiOutlet1TA_Origin := [
    UnionLength(ND_FiManTrunk)*0.5 - UnionSocketDepth(ND_FiManTrunk) + TALengthNew(ND_FiManTrunk);
    0;
    0
] + FiOutlet1Union2_Origin
FiOutlet1PipesLyr := layer_new("FiOutlet1PipesPlu", blue)
FiOutlet1Pipe1 := PipeF(FiOutlet1MTA_Origin, H_FiOutlet1Pipe1, [0; -90]*deg, ND_FiManTrunk, PS_Fi)
FiOutlet1Pipe2 := PipeF(FiOutlet1Tee1_Origin + [-ShortTeeLength(ND_FiManTrunk); 0; ShortTeeLength(ND_FiManTrunk)], H_FiOutlet1Pipe2, [0; 90]*deg, ND_FiManTrunk, PS_Fi)
FiOutlet1Pipe3 := PipeF(FiOutlet1Elbow1_Origin, H_FiOutlet1Pipe3, [0; 0]*deg, ND_FiManTrunk, PS_Fi)
FiOutlet1Pipe4 := PipeF(FiOutlet1Elbow1_Origin + [ElbowRadius(ND_FiManTrunk); 0; ElbowRadius(ND_FiManTrunk)], H_FiOutlet1Pipe4, [0; 90]*deg, ND_FiManTrunk, PS_Fi)
FiOutlet1Pipe5 := PipeF(FiOutlet1MTABody_Origin, H_FiOutlet1Pipe5, [0; 0]*deg, ND_FiManTrunk, PS_Fi)
FiOutlet1DrainNipple := PipeF(FiOutlet1Reducer_Origin, 2*SocketDepth(ND_FiManTrunk), [0; 90]*deg, ND_FiManTrunk, PS_Fi)
FiOutlet1PipesFrz := FreezeLayer("FiOutlet1PipesPlu")
FiOutlet1Pipes := stack(FiOutlet1PipesLyr, FiOutlet1Pipe1, FiOutlet1Pipe2, FiOutlet1Pipe3, FiOutlet1Pipe4, FiOutlet1Pipe5, FiOutlet1DrainNipple, FiOutlet1PipesFrz)
FiOutlet1FittingsLyr := layer_new("FiOutlet1FittingsPlu", green)
FiOutlet1Tee1 := TeeF(FiOutlet1Tee1_Origin, [270; 0; 90]*deg, ND_FiManTrunk, PS_Fi)
FiOutlet1Elbow1 := ElbowF(FiOutlet1Elbow1_Origin, [-90; 0; 90]*deg, ND_FiManTrunk, PS_Fi)
FiOutlet1Elbow2 := ElbowF(FiOutlet1Elbow2_Origin, [180; 0; -90]*deg, ND_FiManTrunk, PS_Fi)
FiOutlet1MTABody := MaleAdapterF(FiOutlet1MTABody_Origin, [180; 0]*deg, ND_FiManTrunk, PS_Fi)
FiOutlet1Reducer := reducerF(FiOutlet1Reducer_Origin, [0; 270; 0]*deg, ND_FiManTrunk, ND_RvsFlowDrain, SocketDepth(ND_RvsFlowDrain), PS_Fi)
FiOutlet1DrainElbow := ElbowF(FiOutlet1DrainElbow_Origin, [0; 0; 270]*deg, ND_RvsFlowDrain, PS_Fi)
FiOutlet1RvsFlowDrain := InsertDwg(BallValveDwg, FiOutlet1DrainValve_Origin, ND_RvsFlowDrain, 0 deg)
FiOutlet1FittingsFrz := FreezeLayer("FiOutlet1FittingsPlu")
FiOutlet1UnionsLyr := layer_new("FiOutlet1UnionsPlu", green)
FiOutlet1Union1 := UnionF(FiOutlet1Union1_Origin, [0; -90]*deg, ND_FiManTrunk, PS_Fi)
FiOutlet1Union2 := UnionF(FiOutlet1Union2_Origin, [180; 0]*deg, ND_FiManTrunk, PS_Fi)
FiOutlet1UnionsFrz := FreezeLayer("FiOutlet1UnionsPlu")
FiOutlet1Fittings := stack(FiOutlet1FittingsLyr, FiOutlet1Tee1, FiOutlet1Elbow1, FiOutlet1Elbow2, FiOutlet1MTABody, FiOutlet1Reducer, FiOutlet1DrainElbow, FiOutlet1RvsFlowDrain, FiOutlet1FittingsFrz, FiOutlet1UnionsLyr, FiOutlet1Union1, FiOutlet1Union2, FiOutlet1UnionsFrz)
FiOutlet1TALyr := layer_new("FiOutlet1TAPlu", yellow)
FiOutlet1TADraw := PipeSUBF(FiOutlet1TA_Origin, TALengthNew(ND_FiManTrunk), [0; 0]*deg, ND_FiManTrunk, PS_Fi, ["FiBody"])
FiOutlet1TAFrz := FreezeLayer("FiOutlet1TAPlu")
FiOutlet1TA := stack(FiOutlet1TALyr, FiOutlet1TADraw, FiOutlet1TAFrz)
FiOutlet1PluThaw := ThawMultiple(["FiOutlet1*Plu"])
RotateFiOutlet1Plu := Rotate_All(FiOutlet1FTA_Origin, AN_FiOutlet1Rot)
FiOutlet1PluFrz := FreezeMultiple(["FiOutlet1*Plu"])
FiOutlet1RotPl := stack(FiOutlet1PluThaw, RotateFiOutlet1Plu, FiOutlet1PluFrz)
FiOutlet1BodySub := CylinderF([FiPipeBottom_Origin[0]; FiPipeBottom_Origin[1]; FiOutlet1TA_Origin[2]], 0.5*outerdiameter(ND_FiManTrunk), 0.5*outerdiameter(ND_FiPipe) + 2 cm, [AN_FiOutlet1Rot; 0 deg])
GroupFiOutlet1BodySub := GroupLast("DeleteMe")
SubtractFiOutlet1Body := SubtractF(["FiBody"], "DeleteMe")
FiOutlet1All := stack(FiOutlet1Pipes, FiOutlet1Fittings, FiOutlet1TA, FiOutlet1RotPl, FiOutlet1BodySub, GroupFiOutlet1BodySub, SubtractFiOutlet1Body)
FiOutletPlumbing := stack(FiOutlet1All, FiOutlet2All, FiOutlet3All)
# Internal Filter Piping
# Rotation Angles for Manifolds (Assume trunks are drawn along positive x (i.e, caps are furthest +ve x material); rotate around FiBody origin).
AN_OutletTrunk3 := 180 deg
AN_InletTrunk4 := AN_FiInlet4Rot = -44.7495 deg
AN_OutletTrunk2 := AN_FiOutlet2Rot = -130.499 deg
AN_InletTrunk3 := 0 deg
AN_InletTrunk2 := AN_FiInlet2Rot = -57.6541 deg
AN_OutletTrunk1 := AN_FiOutlet1Rot = -117.417 deg
AN_InletTrunk1 := -90 deg
AN_OutletTrunk := [AN_OutletTrunk3; AN_OutletTrunk2; AN_OutletTrunk1]
AN_InletTrunk := [AN_InletTrunk4; AN_InletTrunk3; AN_InletTrunk2; AN_InletTrunk1]
FiManFTA_Origin := [
    L_FiManCouplingOffset - innerdiameter(ND_FiPipe, PS_Fi)/2 + CouplingLength(ND_FiManTrunk) - SocketDepth(ND_FiManTrunk) + FiPipeBottom_Origin[0];
    FiPipeBottom_Origin[1];
    S_FiInlet4
] = [-0.101011; 0; 0.102231] m
FiBranch_Origin(i) := [
    FiPipeBottom_Origin[0] + innerdiameter(ND_FiPipe, PS_Fi)/2 - S_FiManBranchEnds - S_FiManBranch*i;
    FiPipeBottom_Origin[1] - L_FiManBranch[i] - 0.5*innerdiameter(ND_FiManTrunk, PS_FiBranch);
    FiManFTA_Origin[2]
]
# origins in "Filter Body" section
FiManTrunkFTALyr := layer_new("FiManTrunkFTAPlu", green)
FiManTrunkFTA := CouplingF(FiManFTA_Origin, [0; 0]*deg, ND_FiManTrunk, PS_Fi)
FiManTrunkFTAFrz := FreezeLayer("FiManTrunkFTAPlu")
FiManTrunkFTAs := stack(FiManTrunkFTALyr, FiManTrunkFTA, FiManTrunkFTAFrz)
FiManTrunkCapLyr := layer_new("FiManTrunkCapPlu", red)
FiManTrunkCap := CapF(FiManFTA_Origin + [L_FiManTrunk; 0; 0], [0; 0]*deg, ND_FiManTrunk)
FiManTrunkCapFrz := FreezeLayer("FiManTrunkCapPlu")
FiManTrunkCaps := stack(FiManTrunkCapLyr, FiManTrunkCap, FiManTrunkCapFrz)
FiManBranchPlu :=
    Local ← layer_new("FiManBranchPlu", blue)
    for i ∈ 0 .. N_FiManBranch - 1
        Local ← stack(Local, PipeF(FiBranch_Origin(i), (L_FiManBranch[i] + innerdiameter(ND_FiManTrunk, PS_Fi)/2)*2, [270; 0]*deg, ND_FiManBranch, PS_FiBranch))
    Local
FiManBranchFrz := FreezeLayer("FiManBranchPlu")
FiBranchCut := BoxF([0; -L_SlotCut*0.5; L_FiBranchSlot*0.5] + FiManFTA_Origin, [L_FiManTrunk; L_SlotCut*0.5; -(L_FiBranchSlot*0.5)] + FiManFTA_Origin, [0; 0; 0]*deg)
SubtractFiBranches := SubtractF(["FiManBranchPlu"], "DeleteMe")
FiBranches := stack(FiManBranchPlu, FiManBranchFrz, FiBranchCut, GroupDelete, SubtractFiBranches)
FiManBranchCapPlu :=
    Local ← layer_new("FiManBranchCapsPlu", red)
    for i ∈ 0 .. N_FiManBranch - 1
        Local ← stack(Local, CutCapF(FiBranch_Origin(i), H_FiManCap, [270; 0]*deg, ND_FiManBranch))
    Local
MirrorFiManBranchCaps := MirrorAll([FiManFTA_Origin[0]; FiManFTA_Origin[1]], [zc; 0] + [FiManFTA_Origin[0]; FiManFTA_Origin[1]], "n")
FiManBranchCapFrz := FreezeLayer("FiManBranchCapsPlu")
FiBranchCaps := stack(FiManBranchCapPlu, MirrorFiManBranchCaps, FiManBranchCapFrz)
FiManTrunkLyr := layer_new("FiManTrunkPlu", blue)
FiManTrunk := PipeF(FiManFTA_Origin + [L_FiManTrunk; 0; 0], L_FiManTrunk, [0; 0]*deg, ND_FiManTrunk, PS_FiBranch)
FiManTrunkFrz := FreezeLayer("FiManTrunkPlu")
FiManTrunks := stack(FiManTrunkLyr, FiManTrunk, FiManTrunkFrz)
FiManArray := stack(ThawMultiple(["FiMan*Plu"]), view("f"), Array_All(N_FiLayer + 1, 1, H_FiLayer), FreezeMultiple(["FiMan*Plu"]))
FiInletRotate :=
    rot ← stack(ThawMultiple(["FiMan*Plu"]), view("f"))
    for i ∈ 0 .. 3
        rot ←
            if AN_InletTrunk[i] ≠ 0
                stack(rot, stack(concat("rotate3d", sp, "w"), concat(point([
                    FiManFTA_Origin[0] - CouplingLength(ND_FiManTrunk);
                    FiManFTA_Origin[2] - 1.1*ConRadius(ND_FiManTrunk) + 2*H_FiLayer*i;
                    0
                ]), sp, point([
                    FiManFTA_Origin[0] + L_FiManTrunk + 2*S_Fitting;
                    FiManFTA_Origin[2] + 1.1*ConRadius(ND_FiManTrunk) + 2*H_FiLayer*i;
                    0
                ]), sp), concat("y", sp, point([FiPipeBottom_Origin[0]; FiPipeBottom_Origin[2]; FiPipeBottom_Origin[1]][:, 0]), sp, stringit_nounits(AN_InletTrunk[i]/deg))))
            rot otherwise
    rot
FiOutletRotate :=
    rot ← stack(view("f"))
    for i ∈ 0 .. 2
        rot ←
            if AN_OutletTrunk[i] ≠ 0
                stack(rot, stack(concat("rotate3d", sp, "w"), concat(point([
                    FiManFTA_Origin[0] - CouplingLength(ND_FiManTrunk);
                    FiManFTA_Origin[2] - 1.1*ConRadius(ND_FiManTrunk) + 2*H_FiLayer*i + H_FiLayer;
                    0
                ]), sp, point([
                    FiManFTA_Origin[0] + L_FiManTrunk + 2*S_Fitting;
                    FiManFTA_Origin[2] + 1.1*ConRadius(ND_FiManTrunk) + H_FiLayer + 2*H_FiLayer*i;
                    0
                ]), sp), concat("y", sp, point([FiPipeBottom_Origin[0]; FiPipeBottom_Origin[2]; FiPipeBottom_Origin[1]][:, 0]), sp, stringit_nounits(AN_OutletTrunk[i]/deg))))
            rot otherwise
    rot ← stack(rot, FreezeMultiple(["FiMan*Plu"]))
    rot
FiInternalPlumbing := stack(FiManTrunkFTAs, FiManTrunkCaps, FiBranches, FiBranchCaps, FiManTrunks, FiManArray, FiInletRotate, FiOutletRotate, view("t"))
# Backwash Drain Plumbing
FiBwDrainFTA_Origin := FiTopCap_Origin + [
    0.5*innerdiameter(ND_FiPipe, PS_Fi) - L_FiManCouplingOffset - SocketDepth(ND_FiBwDrain);
    0;
    -H_Gasket - ConRadius(ND_FiBwDrain) - 2 cm
]
FiBwDrainTA_Origin := FiBwDrainFTA_Origin
FiBwDrainElbow1_Origin := FiBwDrainTA_Origin + [TALength(ND_FiBwDrain); 0; 0]
FiBwDrainPipe1_Origin := FiBwDrainElbow1_Origin + [ElbowRadius(ND_FiBwDrain); 0; -ElbowRadius(ND_FiBwDrain)]
H_FiBwDrainPipe1 := (FiBwDrainPipe1_Origin[2] - Z_FiBwExit) - BallValveLength(ND_FiBwDrain) + BallValveSocket(ND_FiBwDrain) = 1.83783 m
FiBwDrainValve_Origin := FiBwDrainPipe1_Origin + [0; 0; -H_FiBwDrainPipe1] = [0.255391; 0; 0.0382653] m
H_FiBwDrainPipe2 := BallValveSocket(ND_FiBwDrain) + SocketDepth(ND_FiBwDrain)
FiBwDrainElbow2_Origin := [FiBwDrainValve_Origin[0]; FiBwDrainValve_Origin[1]; Z_FiBwExit - SocketDepth(ND_FiBwDrain)]
FiBwDrainPipe3_Origin := FiBwDrainElbow2_Origin + [ElbowRadius(ND_FiBwDrain); 0; -ElbowRadius(ND_FiBwDrain)]
H_FiBwDrainPipe3 := 2*SocketDepth(ND_FiBwDrain)
FiBwDrainElbow3_Origin := FiBwDrainPipe3_Origin + [H_FiBwDrainPipe3; 0; 0]
FiBwDrainPipesLyr := layer_new("FiBwDrainPipesPlu", blue)
FiBwDrainPipe1 := PipeF(FiBwDrainPipe1_Origin, H_FiBwDrainPipe1, [0; -90]*deg, ND_FiManPipe, PS_Fi)
FiBwDrainPipe2 := PipeF(FiBwDrainElbow2_Origin, H_FiBwDrainPipe2, [0; 90]*deg, ND_FiManPipe, PS_Fi)
FiBwDrainPipe3 := PipeF(FiBwDrainPipe3_Origin, H_FiBwDrainPipe3, [0; 180]*deg, ND_FiManPipe, PS_Fi)
FiBwDrainPipesFrz := FreezeLayer("FiBwDrainPipesPlu")
FiBwDrainPipes := stack(FiBwDrainPipesLyr, FiBwDrainPipe1, FiBwDrainPipe2, FiBwDrainPipe2, FiBwDrainPipe3, FiBwDrainPipesFrz)
FiBwDrainFittingsLyr := layer_new("FiBwDrainFittingsPlu", green)
FiBwDrainFTA := CouplingF(FiBwDrainFTA_Origin, [0; 0]*deg, ND_FiManPipe, PS_Fi)
FiBwDrainElbow1 := ElbowF(FiBwDrainElbow1_Origin, [-90; 0; -90]*deg, ND_FiManPipe, PS_Fi)
FiBwDrainValve := stack(view("ba"), InsertDwg(BallValveDwg, [-FiBwDrainValve_Origin[0]; FiBwDrainValve_Origin[2]; -FiBwDrainValve_Origin[1]], ND_FiBwDrain, 90 deg), view("t"))
FiBwDrainElbow2 := ElbowF(FiBwDrainElbow2_Origin, [180; 0; 90]*deg, ND_FiManPipe, PS_Fi)
FiBwDrainElbow3 := ElbowF(FiBwDrainElbow3_Origin, [-90; 0; 90]*deg, ND_FiManPipe, PS_Fi)
FiBwDrainFittingsFrz := FreezeLayer("FiBwDrainFittingsPlu")
FiBwDrainFittings := stack(FiBwDrainFittingsLyr, FiBwDrainFTA, FiBwDrainElbow1, FiBwDrainValve, FiBwDrainElbow2, FiBwDrainElbow3, FiBwDrainFittingsFrz)
FiBwDrainTALyr := layer_new("FiBwDrainTAPlu", yellow)
FiBwDrainTADraw := PipeF(FiBwDrainTA_Origin, TALength(ND_FiBwDrain), [180; 0]*deg, ND_FiManPipe, PS_Fi)
FiBwDrainTAFrz := FreezeLayer("FiBwDrainTAPlu")
FiBwDrainTA := stack(FiBwDrainTALyr, FiBwDrainTADraw, FiBwDrainTAFrz)
FiBwDrainPluThaw := ThawMultiple(["FiBwDrain*Plu"])
RotateFiBwDrainPlu := Rotate_All(FiPipeBottom_Origin, AN_FiBwDrain)
FiBwDrainPluFrz := FreezeMultiple(["FiBwDrain*Plu"])
FiBwDrainRotPl := stack(FiBwDrainPluThaw, RotateFiBwDrainPlu, FiBwDrainPluFrz)
FiBwDrainBodySub := CylinderF([FiPipeBottom_Origin[0]; FiPipeBottom_Origin[1]; FiBwDrainTA_Origin[2]], 0.5*outerdiameter(ND_FiManPipe), 0.5*outerdiameter(ND_FiPipe) + 2 cm, [180 deg + AN_FiBwDrain; 0 deg])
GroupFiBwDrainBodySub := GroupLast("DeleteMe")
SubtractFiBwDrainBody := SubtractF(["FiBody"], "DeleteMe")
FiBwDrain := stack(FiBwDrainPipes, FiBwDrainFittings, FiBwDrainTA, FiBwDrainRotPl, FiBwDrainBodySub, GroupFiBwDrainBodySub, SubtractFiBwDrainBody)
# Sand Drain
FiSandDrainBarb1_Origin := [
    FiPipeBottom_Origin[0] - outerradius(ND_FiPipe)*cos(180 deg + AN_FiBwDrain);
    FiPipeBottom_Origin[1] + outerradius(ND_FiPipe)*sin(180 deg + AN_FiBwDrain);
    Z_FiSandDrain
]
FiSandDrainFTA1_Origin := [
    0.5*outerdiameter(ND_FiPipe) + ConRadius(ND_FiSandDrain) + 2 cm;
    0;
    Z_FiEntTankTop - H_FiSandDrainRigid - (CouplingLength(ND_FiSandDrain) - 2*SocketDepth(ND_FiSandDrain))
]
FiSandDrainBarb2_Origin := FiSandDrainFTA1_Origin + [0; 0; 0]
FiSandDrainRigidPipe_Origin := FiSandDrainFTA1_Origin + [0; 0; CouplingLength(ND_FiSandDrain) - 2*SocketDepth(ND_FiSandDrain)]
FiSandDrainPluLyr := layer_new("FiSandDrainPipesPlu", blue)
FiSandDrainRigidPipe := PipeF(FiSandDrainRigidPipe_Origin, H_FiSandDrainRigid, [0; 90]*deg, ND_FiSandDrain, PS_Fi)
FiSandDrainPluFrz := FreezeLayer("FiSandDrainPipesPlu")
FiSandDrainPipes := stack(FiSandDrainPluLyr, FiSandDrainRigidPipe, FiSandDrainPluFrz)
FiSandDrainFitLyr := layer_new("FiSandDrainFittingsPlu", green)
FiSandDrainFTA1 := CouplingF(FiSandDrainFTA1_Origin, [0; 90]*deg, ND_FiSandDrain, PS_Fi)
FiSandDrainFitFrz := FreezeLayer("FiSandDrainFittingsPlu")
FiSandDrainFittings := stack(FiSandDrainFitLyr, FiSandDrainFTA1, FiSandDrainFitFrz)
FiSandDrainBarbsLyr := layer_new("FiSandDrainBarbsPlu", yellow)
FiSandDrainBarb1 := InsertDwg(ThreadedBarbDwg, FiSandDrainBarb1_Origin, ND_FiSandDrain, -(180 deg + AN_FiBwDrain))
FiSandDrainBarbsFrz := FreezeLayer("FiSandDrainBarbsPlu")
FiSandDrainBarbs := stack(FiSandDrainBarbsLyr, FiSandDrainBarb1, FiSandDrainBarbsFrz)  # FiSandDrainBarb2
FiSandDrainPluThaw := ThawMultiple(["FiSandDrain*Plu"])
RotateFiSandDrainPlu := Rotate_All(FiPipeBottom_Origin, AN_FiSandDrain)
FiSandDrainPluFrz := FreezeMultiple(["FiSandDrain*Plu"])
FiSandDrainRotPl := stack(FiSandDrainPluThaw, RotateFiSandDrainPlu, FiSandDrainPluFrz)
FiSandDrainBodySub := CylinderF([FiPipeBottom_Origin[0]; FiPipeBottom_Origin[1]; FiSandDrainBarb1_Origin[2]], 0.5*outerdiameter(ND_FiSandDrain), 0.5*outerdiameter(ND_FiPipe), [180 deg + AN_FiSandDrain; 0 deg])
GroupFiSandDrainBodySub := GroupLast("DeleteMe")
SubtractFiSandDrainBody := SubtractF(["FiBody"], "DeleteMe")
FiSandDrain := stack(FiSandDrainBarbs)
Fi2Script := stack(FiBody, FiEntTank, FiExitTank, FiOutletPlumbing, FiInletPlumbing, FiInternalPlumbing)
# [component: inputs Fi2Script]
