# Pipes, Manifolds, and Fittings
# Pipe Functions
# The origin will define the right side of the pipe. The pipe will be rotated at its origin.
PipeF(OriginPoint, Length, AngleVector, ND, EN) :=
    PipeOuter ← cylinderD(OriginPoint, OR(ND), OriginPoint - [Length; 0 m; 0 m])
    PipeInner ← cylinderD(OriginPoint + [zc; 0 m; 0 m], ID(ND, EN)/2, OriginPoint - [Length + zc; 0 m; 0 m])
    Zoom ← ZoomWindow([OriginPoint[0] - Length - zc; OriginPoint[1] - OR(ND) - zc; OriginPoint[2]], [OriginPoint[0] - Length + zc; OriginPoint[1] + OR(ND) + zc; OriginPoint[2]])
    SubtractInner ← SubtractGeneral([[OriginPoint[0] - Length; OriginPoint[1] + OR(ND); OriginPoint[2]]], [[OriginPoint[0] - Length - zc; OriginPoint[1] + ID(ND, EN)/2; OriginPoint[2]]])
    Rotate ← [Rotate3DLast(OriginPoint, "z", AngleVector[0]); Rotate3DLast(OriginPoint, "y", AngleVector[1])]
    Final ← stack(PipeOuter, PipeInner, Zoom, SubtractInner)
    for i ∈ 0 .. 1
        Final ← stack(Final, Rotate[i]) if AngleVector[i] ≠ 0
    return Final
PipeSUBF(OriginPoint, Length, AngleVector, ND, EN, SubtractionLayers) :=
    Zoom ← ZoomWindow([OriginPoint[0] - Length - zc; OriginPoint[1] - OR(ND) - zc; OriginPoint[2] - OR(ND)], [OriginPoint[0] + zc; OriginPoint[1] + OR(ND) + zc; OriginPoint[2] + OR(ND)])
    PipeOuter ← cylinderD(OriginPoint, OR(ND), OriginPoint - [Length; 0 m; 0 m])
    Rotate ← [Rotate3DLast(OriginPoint, "z", AngleVector[0]); Rotate3DLast(OriginPoint, "y", AngleVector[1])]
    Local ← stack(Zoom, PipeOuter)
    for i ∈ 0 .. 1
        Local ← stack(Local, Rotate[i]) if AngleVector[i] ≠ 0
    Group ← GroupLast("DeleteMe")
    Local ← stack(Local, Group, SubtractF(SubtractionLayers, "DeleteMe"), PipeOuter)
    PipeInner ← cylinderD(OriginPoint + [zc; 0 m; 0 m], ID(ND, EN)/2, OriginPoint - [Length + zc; 0 m; 0 m])
    Zoom2 ← ZoomWindow([OriginPoint[0] - Length - zc; OriginPoint[1] - OR(ND) - zc; OriginPoint[2]], [OriginPoint[0] - Length + zc; OriginPoint[1] + OR(ND) + zc; OriginPoint[2]])
    SubtractInner ← SubtractGeneral([[OriginPoint[0] - Length; OriginPoint[1] + OR(ND); OriginPoint[2]]], [[OriginPoint[0] - Length - zc; OriginPoint[1] + ID(ND, EN)/2; OriginPoint[2]]])
    Draw ← stack(Local, PipeInner, Zoom2, SubtractInner)
    for i ∈ 0 .. 1
        Draw ← stack(Draw, Rotate[i]) if AngleVector[i] ≠ 0
    return Draw
# Union Functions
UnionF(OriginPoint, AngleVector, ND, EN) :=
    Zoom ← ZoomWindow([
        OriginPoint[0] - CouplingLength(ND) - zc;
        OriginPoint[1] - 1.5*OR_Fitting(ND) - zc;
        OriginPoint[2] + OR_Fitting(ND)
    ], [
        OriginPoint[0] + CouplingLength(ND) + zc;
        OriginPoint[1] + 1.5*OR_Fitting(ND) + zc;
        OriginPoint[2] - OR_Fitting(ND)
    ])
    MainCylinder ← cylinderD([OriginPoint[0] + SocketDepth(ND); OriginPoint[1]; OriginPoint[2]], OR_Fitting(ND), [OriginPoint[0] + SocketDepth(ND) - CouplingLength(ND); OriginPoint[1]; OriginPoint[2]])
    MainCylinderLedge ← cylinderD([OriginPoint[0] + SocketDepth(ND) - 1/3*CouplingLength(ND); OriginPoint[1]; OriginPoint[2]], 1.1*OR_Fitting(ND), [OriginPoint[0] + SocketDepth(ND) - 2/3*CouplingLength(ND); OriginPoint[1]; OriginPoint[2]])
    MainCylinderInner ← cylinderD([OriginPoint[0] + SocketDepth(ND) + zc; OriginPoint[1]; OriginPoint[2]], OR(ND), [OriginPoint[0] + SocketDepth(ND) - CouplingLength(ND) - zc; OriginPoint[1]; OriginPoint[2]])
    SubtractCylinderInner1 ← SubtractGeneral([[OriginPoint[0] + SocketDepth(ND); OriginPoint[1] - OR_Fitting(ND); OriginPoint[2]]], [[OriginPoint[0] + SocketDepth(ND) + zc; OriginPoint[1] - OR(ND); OriginPoint[2]]])
    SubtractCylinderInner2 ← SubtractGeneral([[
        OriginPoint[0] + SocketDepth(ND) - 1/3*CouplingLength(ND);
        OriginPoint[1] - 1.1*OR_Fitting(ND);
        OriginPoint[2]
    ]], [[OriginPoint[0] + SocketDepth(ND) + zc; OriginPoint[1] - OR(ND); OriginPoint[2]]])
    ThreaderOuter ← cylinderD([OriginPoint[0] - 1/3*CouplingLength(ND) + SocketDepth(ND) + zc/2; OriginPoint[1]; OriginPoint[2]], 1.2*OR_Fitting(ND), [OriginPoint[0] - 2/3*CouplingLength(ND) + SocketDepth(ND) + zc/5; OriginPoint[1]; OriginPoint[2]])
    ThreaderInner ← cylinderD([OriginPoint[0] - 1/3*CouplingLength(ND) + SocketDepth(ND); OriginPoint[1]; OriginPoint[2]], 1.1*OR_Fitting(ND) + zc/10, [OriginPoint[0] - 2/3*CouplingLength(ND) - zc; OriginPoint[1]; OriginPoint[2]])
    SubtractThreader1 ← SubtractGeneral([[
        OriginPoint[0] - 1/3*CouplingLength(ND) + SocketDepth(ND) + zc/2;
        OriginPoint[1] + OR_Fitting(ND);
        OriginPoint[2]
    ]], [[
        OriginPoint[0] - CouplingLength(ND) + SocketDepth(ND) - zc;
        OriginPoint[1] - (1.1*OR_Fitting(ND) + zc/10);
        OriginPoint[2]
    ]])
    SubtractThreader2 ← SubtractGeneral([[
        OriginPoint[0] - 1/3*CouplingLength(ND) + SocketDepth(ND) + zc/2;
        OriginPoint[1] + OR_Fitting(ND);
        OriginPoint[2]
    ]], [[OriginPoint[0] + SocketDepth(ND) + zc; OriginPoint[1] - ID(ND, EN)/2; OriginPoint[2]]])
    UnionPieces ← UnionMultiple([
        [
            OriginPoint[0] + SocketDepth(ND) - 2/3*CouplingLength(ND);
            OriginPoint[1] + ((OR_Fitting(ND) - OR(ND))/2 + OR(ND));
            OriginPoint[2]
        ];
        [
            OriginPoint[0] - 2/3*CouplingLength(ND) + SocketDepth(ND) + zc/5;
            OriginPoint[1] + OR_Fitting(ND);
            OriginPoint[2]
        ];
        [OriginPoint[0] + SocketDepth(ND); OriginPoint[1] - OR(ND); OriginPoint[2]]
    ])
    Rotate ← [Rotate3DLast(OriginPoint, "z", AngleVector[0]); Rotate3DLast(OriginPoint, "y", AngleVector[1])]
    Final ← stack(Zoom, MainCylinder, MainCylinderLedge, MainCylinderInner, SubtractCylinderInner1, MainCylinderInner, SubtractCylinderInner2, ThreaderOuter, ThreaderInner, SubtractThreader1, MainCylinderInner, SubtractThreader2, UnionPieces)
    for i ∈ 0 .. 1
        Final ← stack(Final, Rotate[i]) if AngleVector[i] ≠ 0
    return Final
UnionSUBF(OriginPoint, AngleVector, ND, EN, SubtractionLayers) :=
    Zoom ← ZoomWindow([
        OriginPoint[0] - CouplingLength(ND) - zc;
        OriginPoint[1] - 1.5*OR_Fitting(ND) - zc;
        OriginPoint[2] + OR_Fitting(ND)
    ], [
        OriginPoint[0] + CouplingLength(ND) + zc;
        OriginPoint[1] + 1.5*OR_Fitting(ND) + zc;
        OriginPoint[2] - OR_Fitting(ND)
    ])
    MainCylinder ← cylinderD([OriginPoint[0] + SocketDepth(ND); OriginPoint[1]; OriginPoint[2]], OR_Fitting(ND), [OriginPoint[0] + SocketDepth(ND) - CouplingLength(ND); OriginPoint[1]; OriginPoint[2]])
    MainCylinderLedge ← cylinderD([OriginPoint[0] + SocketDepth(ND) - 1/3*CouplingLength(ND); OriginPoint[1]; OriginPoint[2]], 1.1*OR_Fitting(ND), [OriginPoint[0] + SocketDepth(ND) - 2/3*CouplingLength(ND); OriginPoint[1]; OriginPoint[2]])
    MainCylinderInner ← cylinderD([OriginPoint[0] + SocketDepth(ND) + zc; OriginPoint[1]; OriginPoint[2]], OR(ND), [OriginPoint[0] + SocketDepth(ND) - CouplingLength(ND) - zc; OriginPoint[1]; OriginPoint[2]])
    SubtractCylinderInner1 ← SubtractGeneral([[OriginPoint[0] + SocketDepth(ND); OriginPoint[1] - OR_Fitting(ND); OriginPoint[2]]], [[OriginPoint[0] + SocketDepth(ND) + zc; OriginPoint[1] - OR(ND); OriginPoint[2]]])
    SubtractCylinderInner2 ← SubtractGeneral([[
        OriginPoint[0] + SocketDepth(ND) - 1/3*CouplingLength(ND);
        OriginPoint[1] - 1.1*OR_Fitting(ND);
        OriginPoint[2]
    ]], [[OriginPoint[0] + SocketDepth(ND) + zc; OriginPoint[1] - OR(ND); OriginPoint[2]]])
    ThreaderOuter ← cylinderD([OriginPoint[0] - 1/3*CouplingLength(ND) + SocketDepth(ND) + zc/2; OriginPoint[1]; OriginPoint[2]], 1.2*OR_Fitting(ND), [OriginPoint[0] - 2/3*CouplingLength(ND) + SocketDepth(ND) + zc/5; OriginPoint[1]; OriginPoint[2]])
    ThreaderInner ← cylinderD([OriginPoint[0] - 1/3*CouplingLength(ND) + SocketDepth(ND); OriginPoint[1]; OriginPoint[2]], 1.1*OR_Fitting(ND) + zc/10, [OriginPoint[0] - 2/3*CouplingLength(ND) - zc; OriginPoint[1]; OriginPoint[2]])
    SubtractThreader1 ← SubtractGeneral([[
        OriginPoint[0] - 1/3*CouplingLength(ND) + SocketDepth(ND) + zc/2;
        OriginPoint[1] + OR_Fitting(ND);
        OriginPoint[2]
    ]], [[
        OriginPoint[0] - CouplingLength(ND) + SocketDepth(ND) - zc;
        OriginPoint[1] - (1.1*OR_Fitting(ND) + zc/10);
        OriginPoint[2]
    ]])
    SubtractThreader2 ← SubtractGeneral([[
        OriginPoint[0] - 1/3*CouplingLength(ND) + SocketDepth(ND) + zc/2;
        OriginPoint[1] + OR_Fitting(ND);
        OriginPoint[2]
    ]], [[OriginPoint[0] + SocketDepth(ND) + zc; OriginPoint[1] - ID(ND, EN)/2; OriginPoint[2]]])
    UnionPieces ← UnionMultiple([
        [
            OriginPoint[0] + SocketDepth(ND) - 2/3*CouplingLength(ND);
            OriginPoint[1] + ((OR_Fitting(ND) - OR(ND))/2 + OR(ND));
            OriginPoint[2]
        ];
        [
            OriginPoint[0] - 2/3*CouplingLength(ND) + SocketDepth(ND) + zc/5;
            OriginPoint[1] + OR_Fitting(ND);
            OriginPoint[2]
        ];
        [OriginPoint[0] + SocketDepth(ND); OriginPoint[1] - OR(ND); OriginPoint[2]]
    ])
    Rotate ← [Rotate3DLast(OriginPoint, "z", AngleVector[0]); Rotate3DLast(OriginPoint, "y", AngleVector[1])]
    SubtractionPieces ← stack(Zoom, MainCylinder, MainCylinderLedge, ThreaderOuter, UnionPieces)
    for i ∈ 0 .. 1
        SubtractionPieces ← stack(SubtractionPieces, Rotate[i]) if AngleVector[i] ≠ 0
    Group ← GroupLast("DeleteMe")
    Local ← stack(SubtractionPieces, Group, SubtractF(SubtractionLayers, "DeleteMe"))
    Final ← stack(Local, Zoom, MainCylinder, MainCylinderLedge, MainCylinderInner, SubtractCylinderInner1, MainCylinderInner, SubtractCylinderInner2, ThreaderOuter, ThreaderInner, SubtractThreader1, MainCylinderInner, SubtractThreader2, UnionPieces)
    for i ∈ 0 .. 1
        Final ← stack(Final, Rotate[i]) if AngleVector[i] ≠ 0
    return Final
# Elbow Functions
# The elbow is initially oriented with an arm along the negative x axis and another along the negative y axis. The origin defined the inner edge of the socket on the y axis arm.
ElbowF(OriginPoint, AngleVector, ND, EN) :=
    Zoom ← ZoomWindow([
        OriginPoint[0] - 2*ElbowRadius(ND) - OR_Fitting(ND) - zc;
        OriginPoint[1] - ElbowRadius(ND) - OR_Fitting(ND) - zc;
        OriginPoint[2] - OR_Fitting(ND) - zc
    ], [
        OriginPoint[0] + OR_Fitting(ND) + zc;
        OriginPoint[1] + ElbowRadius(ND) + OR_Fitting(ND) + zc;
        OriginPoint[2] + OR_Fitting(ND) + zc
    ])
    OuterTorus ← Torus(OriginPoint + [-ElbowRadius(ND); 0 m; 0 m], ElbowRadius(ND), OR(ND))
    Box1 ← Box([
        OriginPoint[0] - 2*ElbowRadius(ND) - OR(ND) - zc;
        OriginPoint[1] - ElbowRadius(ND) - OR(ND) - zc;
        OriginPoint[2] - OR(ND) - zc
    ], [
        OriginPoint[0] - ElbowRadius(ND);
        OriginPoint[1] + ElbowRadius(ND) + OR(ND) + zc;
        OriginPoint[2] + OR(ND) + zc
    ])
    Subtract1 ← SubtractGeneral([[OriginPoint[0] + OR(ND); OriginPoint[1]; OriginPoint[2]]], [[
        OriginPoint[0] - 2*ElbowRadius(ND) - OR(ND) - zc;
        OriginPoint[1] - ElbowRadius(ND) - OR(ND) - zc;
        OriginPoint[2] - OR(ND) - zc
    ]])
    InnerTorus ← Torus(OriginPoint + [-ElbowRadius(ND); 0 m; 0 m], ElbowRadius(ND), ID(ND, EN)/2)
    Subtract2 ← SubtractGeneral([[OriginPoint[0] + OR(ND); OriginPoint[1]; OriginPoint[2]]], [[OriginPoint[0] - 2*ElbowRadius(ND) - ID(ND, EN)/2; OriginPoint[1]; OriginPoint[2]]])
    Box2 ← Box([
        OriginPoint[0] - ElbowRadius(ND) - zc;
        OriginPoint[1] - ElbowRadius(ND) - OR(ND) - zc;
        OriginPoint[2] - OR(ND) - zc
    ], [OriginPoint[0] + OR(ND) + zc; OriginPoint[1]; OriginPoint[2] + OR(ND) + zc])
    Subtract3 ← SubtractGeneral([[OriginPoint[0] - ElbowRadius(ND); OriginPoint[1] + ElbowRadius(ND) + OR(ND); OriginPoint[2]]], [[
        OriginPoint[0] - ElbowRadius(ND) - zc;
        OriginPoint[1] - ElbowRadius(ND) - OR(ND) - zc;
        OriginPoint[2] - OR(ND) - zc
    ]])
    OuterCylinder ← cylinderD([OriginPoint[0] - ElbowRadius(ND); OriginPoint[1] + ElbowRadius(ND); OriginPoint[2]], OR_Fitting(ND), [
        OriginPoint[0] - ElbowRadius(ND) - SocketDepth(ND);
        OriginPoint[1] + ElbowRadius(ND);
        OriginPoint[2]
    ])
    InnerCylinder ← cylinderD([OriginPoint[0] - ElbowRadius(ND) + zc; OriginPoint[1] + ElbowRadius(ND); OriginPoint[2]], OR(ND), [
        OriginPoint[0] - ElbowRadius(ND) - SocketDepth(ND) - zc;
        OriginPoint[1] + ElbowRadius(ND);
        OriginPoint[2]
    ])
    Subtract4 ← SubtractGeneral([[
        OriginPoint[0] - ElbowRadius(ND);
        OriginPoint[1] + ElbowRadius(ND) - OR_Fitting(ND);
        OriginPoint[2]
    ]], [[OriginPoint[0] - ElbowRadius(ND) + zc; OriginPoint[1] + ElbowRadius(ND) - OR(ND); OriginPoint[2]]])
    Mirror ← Mirror([OriginPoint[0] - ElbowRadius(ND); OriginPoint[1] + ElbowRadius(ND); OriginPoint[2]], [OriginPoint[0] - ElbowRadius(ND); OriginPoint[1]], [OriginPoint[0] - ElbowRadius(ND) + zc; OriginPoint[1] + zc], "n")
    Union ← UnionMultiple([
        [OriginPoint[0] + OR_Fitting(ND); OriginPoint[1] - SocketDepth(ND); OriginPoint[2]];
        [
            OriginPoint[0] - ElbowRadius(ND) + ElbowRadius(ND)/sqrt(2);
            OriginPoint[1] + ElbowRadius(ND)/sqrt(2);
            OriginPoint[2]
        ];
        [
            OriginPoint[0] - ElbowRadius(ND);
            OriginPoint[1] + ElbowRadius(ND) + OR_Fitting(ND);
            OriginPoint[2]
        ]
    ])
    Rotate ← [
        Rotate3DLast(OriginPoint, "z", AngleVector[0]);
        Rotate3DLast(OriginPoint, "y", AngleVector[1]);
        Rotate3DLast(OriginPoint, "x", AngleVector[2])
    ]
    One ← concat(Zoom, sp, OuterTorus, sp, Box1, sp, Subtract1)
    Two ← concat(InnerTorus, sp, Subtract2, sp, Box2, sp, Subtract3)
    Three ← concat(OuterCylinder, sp, InnerCylinder, sp, Subtract4)
    Final ← stack(One, Two, Three, concat(Mirror, Union))
    for i ∈ 0 .. 2
        Final ← stack(Final, Rotate[i]) if AngleVector[i] ≠ 0
    return Final
ElbowSUBF(OriginPoint, AngleVector, ND, EN, SubtractionLayers) :=
    Zoom ← ZoomWindow([
        OriginPoint[0] - 2*ElbowRadius(ND) - OR_Fitting(ND) - zc;
        OriginPoint[1] - ElbowRadius(ND) - OR_Fitting(ND) - zc;
        OriginPoint[2] - OR_Fitting(ND) - zc
    ], [
        OriginPoint[0] + OR_Fitting(ND) + zc;
        OriginPoint[1] + ElbowRadius(ND) + OR_Fitting(ND) + zc;
        OriginPoint[2] + OR_Fitting(ND) + zc
    ])
    OuterTorus ← Torus(OriginPoint + [-ElbowRadius(ND); 0 m; 0 m], ElbowRadius(ND), OR(ND))
    Box1 ← Box([
        OriginPoint[0] - 2*ElbowRadius(ND) - OR(ND) - zc;
        OriginPoint[1] - ElbowRadius(ND) - OR(ND) - zc;
        OriginPoint[2] - OR(ND) - zc
    ], [
        OriginPoint[0] - ElbowRadius(ND);
        OriginPoint[1] + ElbowRadius(ND) + OR(ND) + zc;
        OriginPoint[2] + OR(ND) + zc
    ])
    Subtract1 ← SubtractGeneral([[OriginPoint[0] + OR(ND); OriginPoint[1]; OriginPoint[2]]], [[
        OriginPoint[0] - 2*ElbowRadius(ND) - OR(ND) - zc;
        OriginPoint[1] - ElbowRadius(ND) - OR(ND) - zc;
        OriginPoint[2] - OR(ND) - zc
    ]])
    Box2 ← Box([
        OriginPoint[0] - ElbowRadius(ND) - zc;
        OriginPoint[1] - ElbowRadius(ND) - OR(ND) - zc;
        OriginPoint[2] - OR(ND) - zc
    ], [OriginPoint[0] + OR(ND) + zc; OriginPoint[1]; OriginPoint[2] + OR(ND) + zc])
    Subtract3 ← SubtractGeneral([[OriginPoint[0] - ElbowRadius(ND); OriginPoint[1] + ElbowRadius(ND) + OR(ND); OriginPoint[2]]], [[
        OriginPoint[0] - ElbowRadius(ND) - zc;
        OriginPoint[1] - ElbowRadius(ND) - OR(ND) - zc;
        OriginPoint[2] - OR(ND) - zc
    ]])
    OuterCylinder ← cylinderD([OriginPoint[0] - ElbowRadius(ND); OriginPoint[1] + ElbowRadius(ND); OriginPoint[2]], OR_Fitting(ND), [
        OriginPoint[0] - ElbowRadius(ND) - SocketDepth(ND);
        OriginPoint[1] + ElbowRadius(ND);
        OriginPoint[2]
    ])
    Mirror ← Mirror([OriginPoint[0] - ElbowRadius(ND); OriginPoint[1] + ElbowRadius(ND); OriginPoint[2]], [OriginPoint[0] - ElbowRadius(ND); OriginPoint[1]], [OriginPoint[0] - ElbowRadius(ND) + zc; OriginPoint[1] + zc], "n")
    Union ← UnionMultiple([
        [OriginPoint[0] + OR_Fitting(ND); OriginPoint[1] - SocketDepth(ND); OriginPoint[2]];
        [
            OriginPoint[0] - ElbowRadius(ND) + ElbowRadius(ND)/sqrt(2);
            OriginPoint[1] + ElbowRadius(ND)/sqrt(2);
            OriginPoint[2]
        ];
        [
            OriginPoint[0] - ElbowRadius(ND);
            OriginPoint[1] + ElbowRadius(ND) + OR_Fitting(ND);
            OriginPoint[2]
        ]
    ])
    Rotate ← [
        Rotate3DLast(OriginPoint, "z", AngleVector[0]);
        Rotate3DLast(OriginPoint, "y", AngleVector[1]);
        Rotate3DLast(OriginPoint, "x", AngleVector[2])
    ]
    Final ← stack(view("t"), concat(Zoom, sp, OuterTorus, sp, Box1, sp, Subtract1), concat(Box2, sp, Subtract3), concat(OuterCylinder, sp, Mirror, Union))
    for i ∈ 0 .. 2
        Final ← stack(Final, Rotate[i]) if AngleVector[i] ≠ 0
    Group ← GroupLast("DeleteMe")
    Local ← stack(Final, Group, SubtractF(SubtractionLayers, "DeleteMe"))
    InnerTorus ← Torus(OriginPoint + [-ElbowRadius(ND); 0 m; 0 m], ElbowRadius(ND), ID(ND, EN)/2)
    Subtract2 ← SubtractGeneral([[OriginPoint[0] + OR(ND); OriginPoint[1]; OriginPoint[2]]], [[OriginPoint[0] - 2*ElbowRadius(ND) - ID(ND, EN)/2; OriginPoint[1]; OriginPoint[2]]])
    InnerCylinder ← cylinderD([OriginPoint[0] - ElbowRadius(ND) + zc; OriginPoint[1] + ElbowRadius(ND); OriginPoint[2]], OR(ND), [
        OriginPoint[0] - ElbowRadius(ND) - SocketDepth(ND) - zc;
        OriginPoint[1] + ElbowRadius(ND);
        OriginPoint[2]
    ])
    Subtract4 ← SubtractGeneral([[
        OriginPoint[0] - ElbowRadius(ND);
        OriginPoint[1] + ElbowRadius(ND) - OR_Fitting(ND);
        OriginPoint[2]
    ]], [[OriginPoint[0] - ElbowRadius(ND) + zc; OriginPoint[1] + ElbowRadius(ND) - OR(ND); OriginPoint[2]]])
    One ← concat(Zoom, sp, OuterTorus, sp, Box1, sp, Subtract1)
    Two ← concat(InnerTorus, sp, Subtract2, sp, Box2, sp, Subtract3)
    Three ← concat(OuterCylinder, sp, InnerCylinder, sp, Subtract4)
    Final2 ← stack(One, Two, Three, concat(Mirror, Union))
    Draw ← stack(Local, Final2)
    for i ∈ 0 .. 2
        Draw ← stack(Draw, Rotate[i]) if AngleVector[i] ≠ 0
    return Draw
Elbow45F(OriginPoint, AngleVector, ND, EN) :=
    Zoom ← ZoomWindow([
        OriginPoint[0] - 2*ElbowRadius(ND) - OR_Fitting(ND) - zc;
        OriginPoint[1] - ElbowRadius(ND) - OR_Fitting(ND) - zc;
        OriginPoint[2] - OR_Fitting(ND) - zc
    ], [
        OriginPoint[0] + OR_Fitting(ND) + zc;
        OriginPoint[1] + ElbowRadius(ND) + OR_Fitting(ND) + zc;
        OriginPoint[2] + OR_Fitting(ND) + zc
    ])
    OuterTorus ← Torus(OriginPoint + [-ElbowRadius(ND); 0 m; 0 m], ElbowRadius(ND), OR(ND))
    Box1 ← Box([
        OriginPoint[0] - 2*ElbowRadius(ND) - OR(ND) - zc;
        OriginPoint[1] - ElbowRadius(ND) - OR(ND) - zc;
        OriginPoint[2] - OR(ND) - zc
    ], [
        OriginPoint[0] - ElbowRadius(ND);
        OriginPoint[1] + ElbowRadius(ND) + OR(ND) + zc;
        OriginPoint[2] + OR(ND) + zc
    ])
    Subtract1 ← SubtractGeneral([[OriginPoint[0] + OR(ND); OriginPoint[1]; OriginPoint[2]]], [[
        OriginPoint[0] - 2*ElbowRadius(ND) - OR(ND) - zc;
        OriginPoint[1] - ElbowRadius(ND) - OR(ND) - zc;
        OriginPoint[2] - OR(ND) - zc
    ]])
    InnerTorus ← Torus(OriginPoint + [-ElbowRadius(ND); 0 m; 0 m], ElbowRadius(ND), ID(ND, EN)/2)
    Subtract2 ← SubtractGeneral([[OriginPoint[0] + OR(ND); OriginPoint[1]; OriginPoint[2]]], [[OriginPoint[0] - 2*ElbowRadius(ND) - ID(ND, EN)/2; OriginPoint[1]; OriginPoint[2]]])
    Box2 ← Box([
        OriginPoint[0] - ElbowRadius(ND) - zc;
        OriginPoint[1] - ElbowRadius(ND) - OR(ND) - zc;
        OriginPoint[2] - OR(ND) - zc
    ], [OriginPoint[0] + OR(ND) + zc; OriginPoint[1]; OriginPoint[2] + OR(ND) + zc])
    Subtract3 ← SubtractGeneral([[OriginPoint[0] - ElbowRadius(ND); OriginPoint[1] + ElbowRadius(ND) + OR(ND); OriginPoint[2]]], [[
        OriginPoint[0] - ElbowRadius(ND) - zc;
        OriginPoint[1] - ElbowRadius(ND) - OR(ND) - zc;
        OriginPoint[2] - OR(ND) - zc
    ]])
    Wedge ← wedge3d([
        OriginPoint[0] - ElbowRadius(ND) - zc;
        OriginPoint[2] - OR(ND) - zc;
        -OriginPoint[1] - ElbowRadius(ND) - OR(ND) - zc
    ], [OriginPoint[0] + OR(ND) + zc; OriginPoint[2] + OR(ND) + zc; -OriginPoint[1] + zc])
    Subtract4 ← SubtractGeneral([[OriginPoint[0] + OR(ND); OriginPoint[1]; OriginPoint[2]]], [[
        OriginPoint[0] - ElbowRadius(ND) - zc;
        OriginPoint[1] + ElbowRadius(ND) + OR(ND) + zc;
        OriginPoint[2] - OR(ND) - zc
    ]])
    OuterCylinder ← cylinderD([OriginPoint[0]; OriginPoint[1]; OriginPoint[2]], OR_Fitting(ND), [OriginPoint[0]; OriginPoint[1] - SocketDepth(ND) - zc/5; OriginPoint[2]])
    InnerCylinder ← cylinderD([OriginPoint[0]; OriginPoint[1]; OriginPoint[2]], OR(ND), [OriginPoint[0]; OriginPoint[1] - SocketDepth(ND) - zc/5 - zc; OriginPoint[2]])
    Subtract5 ← SubtractGeneral([[OriginPoint[0] + OR_Fitting(ND); OriginPoint[1]; OriginPoint[2]]], [[OriginPoint[0] + OR(ND); OriginPoint[1] - SocketDepth(ND) - zc/5 - zc; OriginPoint[2]]])
    Move ← MoveLast(OriginPoint, OriginPoint + [0 m; zc/5; 0 m])
    Mirror ← MirrorLast([OriginPoint[0] - ElbowRadius(ND); OriginPoint[1]], [OriginPoint[0] - ElbowRadius(ND) + zc; OriginPoint[1] + tan(22.5 deg)*zc], "n")
    Union ← UnionMultiple([
        [OriginPoint[0] + OR_Fitting(ND); OriginPoint[1] - SocketDepth(ND); OriginPoint[2]];
        [
            OriginPoint[0] - ElbowRadius(ND) + ElbowRadius(ND)*cos(22.5 deg);
            OriginPoint[1] + ElbowRadius(ND)*sin(22.5 deg);
            OriginPoint[2] + OR(ND)
        ];
        [
            OriginPoint[0] - ElbowRadius(ND) + ElbowRadius(ND)/sqrt(2);
            OriginPoint[1] + ElbowRadius(ND)/sqrt(2);
            OriginPoint[2] + OR_Fitting(ND)
        ]
    ])
    Rotate ← [
        Rotate3DLast(OriginPoint, "z", AngleVector[0]);
        Rotate3DLast(OriginPoint, "y", AngleVector[1]);
        Rotate3DLast(OriginPoint, "x", AngleVector[2])
    ]
    One ← stack(view("t"), concat(Zoom, sp, OuterTorus, sp, Box1, sp, Subtract1))
    Two ← concat(InnerTorus, sp, Subtract2, sp, Box2, sp, Subtract3)
    Three ← stack(view("f"), Wedge, view("t"))
    Four ← concat(Zoom, sp, Subtract4)
    Five ← concat(OuterCylinder, sp, InnerCylinder)
    Six ← concat(Subtract5, sp, Move)
    Final ← stack(One, Two, Three, Four, Five, Six, concat(Mirror, sp, Union))
    for i ∈ 0 .. 2
        Final ← stack(Final, Rotate[i]) if AngleVector[i] ≠ 0
    return Final
Elbow45SUBF(OriginPoint, AngleVector, ND, EN, SubtractionLayers) :=
    Zoom ← ZoomWindow([
        OriginPoint[0] - 2*ElbowRadius(ND) - OR_Fitting(ND) - zc;
        OriginPoint[1] - ElbowRadius(ND) - OR_Fitting(ND) - zc;
        OriginPoint[2] - OR_Fitting(ND) - zc
    ], [
        OriginPoint[0] + OR_Fitting(ND) + zc;
        OriginPoint[1] + ElbowRadius(ND) + OR_Fitting(ND) + zc;
        OriginPoint[2] + OR_Fitting(ND) + zc
    ])
    OuterTorus ← Torus(OriginPoint + [-ElbowRadius(ND); 0 m; 0 m], ElbowRadius(ND), OR(ND))
    Box1 ← Box([
        OriginPoint[0] - 2*ElbowRadius(ND) - OR(ND) - zc;
        OriginPoint[1] - ElbowRadius(ND) - OR(ND) - zc;
        OriginPoint[2] - OR(ND) - zc
    ], [
        OriginPoint[0] - ElbowRadius(ND);
        OriginPoint[1] + ElbowRadius(ND) + OR(ND) + zc;
        OriginPoint[2] + OR(ND) + zc
    ])
    Subtract1 ← SubtractGeneral([[OriginPoint[0] + OR(ND); OriginPoint[1]; OriginPoint[2]]], [[
        OriginPoint[0] - 2*ElbowRadius(ND) - OR(ND) - zc;
        OriginPoint[1] - ElbowRadius(ND) - OR(ND) - zc;
        OriginPoint[2] - OR(ND) - zc
    ]])
    InnerTorus ← Torus(OriginPoint + [-ElbowRadius(ND); 0 m; 0 m], ElbowRadius(ND), ID(ND, EN)/2)
    Subtract2 ← SubtractGeneral([[OriginPoint[0] + OR(ND); OriginPoint[1]; OriginPoint[2]]], [[OriginPoint[0] - 2*ElbowRadius(ND) - ID(ND, EN)/2; OriginPoint[1]; OriginPoint[2]]])
    Box2 ← Box([
        OriginPoint[0] - ElbowRadius(ND) - zc;
        OriginPoint[1] - ElbowRadius(ND) - OR(ND) - zc;
        OriginPoint[2] - OR(ND) - zc
    ], [OriginPoint[0] + OR(ND) + zc; OriginPoint[1]; OriginPoint[2] + OR(ND) + zc])
    Subtract3 ← SubtractGeneral([[OriginPoint[0] - ElbowRadius(ND); OriginPoint[1] + ElbowRadius(ND) + OR(ND); OriginPoint[2]]], [[
        OriginPoint[0] - ElbowRadius(ND) - zc;
        OriginPoint[1] - ElbowRadius(ND) - OR(ND) - zc;
        OriginPoint[2] - OR(ND) - zc
    ]])
    Wedge ← wedge3d([
        OriginPoint[0] - ElbowRadius(ND) - zc;
        OriginPoint[2] - OR(ND) - zc;
        -OriginPoint[1] - ElbowRadius(ND) - OR(ND) - zc
    ], [OriginPoint[0] + OR(ND) + zc; OriginPoint[2] + OR(ND) + zc; -OriginPoint[1] + zc])
    Subtract4 ← SubtractGeneral([[OriginPoint[0] + OR(ND); OriginPoint[1]; OriginPoint[2]]], [[
        OriginPoint[0] - ElbowRadius(ND) - zc;
        OriginPoint[1] + ElbowRadius(ND) + OR(ND) + zc;
        OriginPoint[2] - OR(ND) - zc
    ]])
    OuterCylinder ← cylinderD([OriginPoint[0]; OriginPoint[1]; OriginPoint[2]], OR_Fitting(ND), [OriginPoint[0]; OriginPoint[1] - SocketDepth(ND) - zc/5; OriginPoint[2]])
    InnerCylinder ← cylinderD([OriginPoint[0]; OriginPoint[1]; OriginPoint[2]], OR(ND), [OriginPoint[0]; OriginPoint[1] - SocketDepth(ND) - zc/5 - zc; OriginPoint[2]])
    Subtract5 ← SubtractGeneral([[OriginPoint[0] + OR_Fitting(ND); OriginPoint[1]; OriginPoint[2]]], [[OriginPoint[0] + OR(ND); OriginPoint[1] - SocketDepth(ND) - zc/5 - zc; OriginPoint[2]]])
    Move ← MoveLast(OriginPoint, OriginPoint + [0 m; zc/5; 0 m])
    Mirror ← MirrorLast([OriginPoint[0] - ElbowRadius(ND); OriginPoint[1]], [OriginPoint[0] - ElbowRadius(ND) + zc; OriginPoint[1] + tan(22.5 deg)*zc], "n")
    Union ← UnionMultiple([
        [OriginPoint[0] + OR_Fitting(ND); OriginPoint[1] - SocketDepth(ND); OriginPoint[2]];
        [
            OriginPoint[0] - ElbowRadius(ND) + ElbowRadius(ND)*cos(22.5 deg);
            OriginPoint[1] + ElbowRadius(ND)*sin(22.5 deg);
            OriginPoint[2] + outerradius(ND)
        ];
        [
            OriginPoint[0] - ElbowRadius(ND) + ElbowRadius(ND)/sqrt(2);
            OriginPoint[1] + ElbowRadius(ND)/sqrt(2);
            OriginPoint[2] + ConRadius(ND)
        ]
    ])
    Rotate ← [
        Rotate3DLast(OriginPoint, "z", AngleVector[0]);
        Rotate3DLast(OriginPoint, "y", AngleVector[1]);
        Rotate3DLast(OriginPoint, "x", AngleVector[2])
    ]
    One ← stack(view("t"), concat(Zoom, sp, OuterTorus, sp, Box1, sp, Subtract1))
    Two ← concat(InnerTorus, sp, Subtract2)
    Three ← concat(Box2, sp, Subtract3)
    Four ← stack(view("f"), Wedge, view("t"))
    Five ← concat(Zoom, sp, Subtract4, sp, OuterCylinder)
    Six ← concat(InnerCylinder, sp, Subtract5)
    Seven ← concat(Move, sp, Mirror, sp, Union)
    Eight ← stack(GroupLast("DeleteMe"), SubtractF(SubtractionLayers, "DeleteMe"))
    Sub ← stack(One, Three, Four, Five, Seven)
    Real ← stack(One, Two, Three, Four, Five, Six, Seven)
    for i ∈ 0 .. 2
        Sub ← stack(Sub, Rotate[i]) if AngleVector[i] ≠ 0
        Real ← stack(Real, Rotate[i]) if AngleVector[i] ≠ 0
    Sub ← stack(Sub, Eight)
    Final ← stack(Sub, Real)
    return Final
# Male Adapter Functions
# The Origin of the male adapter defines its center between the slip side and threaded side. The slip side of the adapter is oriented along the positive x axis before any rotation occurs.
MaleAdapterF(OriginPoint, AngleVector, ND, EN) :=
    Zoom ← ZoomWindow([
        OriginPoint[0] + MaleAdapterLength(ND) + zc;
        OriginPoint[1] - OR_Fitting(ND) - zc;
        OriginPoint[2] + OR_Fitting(ND)
    ], [
        OriginPoint[0] - MaleAdapterLength(ND) - zc;
        OriginPoint[1] + OR_Fitting(ND) + zc;
        OriginPoint[2] - OR_Fitting(ND)
    ])
    CylinderOutSocket ← cylinderD([OriginPoint[0] + SocketDepth(ND); OriginPoint[1]; OriginPoint[2]], OR_Fitting(ND), [OriginPoint[0]; OriginPoint[1]; OriginPoint[2]])
    CylinderInSocket ← cylinderD([OriginPoint[0] + SocketDepth(ND) + zc; OriginPoint[1]; OriginPoint[2]], OR(ND), [OriginPoint[0] - zc; OriginPoint[1]; OriginPoint[2]])
    SubtractSocket ← SubtractGeneral([[OriginPoint[0] + SocketDepth(ND); OriginPoint[1] - OR_Fitting(ND); OriginPoint[2]]], [[OriginPoint[0] + SocketDepth(ND) + zc; OriginPoint[1] - OR(ND); OriginPoint[2]]])
    CylinderOutThread ← cylinderD([OriginPoint[0]; OriginPoint[1]; OriginPoint[2]], OR(ND), [OriginPoint[0] - (MaleAdapterLength(ND) - SocketDepth(ND)); OriginPoint[1]; OriginPoint[2]])
    CylinderInThread ← cylinderD([OriginPoint[0] + zc; OriginPoint[1]; OriginPoint[2]], ID(ND, EN)/2, [OriginPoint[0] - (MaleAdapterLength(ND) - SocketDepth(ND)) - zc; OriginPoint[1]; OriginPoint[2]])
    SubtractThread ← SubtractGeneral([[
        OriginPoint[0] - (MaleAdapterLength(ND) - SocketDepth(ND));
        OriginPoint[1] - OR(ND);
        OriginPoint[2]
    ]], [[
        OriginPoint[0] - (MaleAdapterLength(ND) - SocketDepth(ND)) - zc;
        OriginPoint[1] - ID(ND, EN)/2;
        OriginPoint[2]
    ]])
    Union ← UnionMultiple([
        [OriginPoint[0] - (MaleAdapterLength(ND) - SocketDepth(ND)); OriginPoint[1]; OriginPoint[2]];
        [OriginPoint[0] + SocketDepth(ND); OriginPoint[1]; OriginPoint[2]]
    ])
    Rotate ← [Rotate3DLast(OriginPoint, "z", AngleVector[0]); Rotate3DLast(OriginPoint, "y", AngleVector[1])]
    Final ← stack(Zoom, CylinderOutSocket, CylinderInSocket, SubtractSocket, CylinderOutThread, CylinderInThread, SubtractThread, Union)
    for i ∈ 0 .. 1
        Final ← stack(Final, Rotate[i]) if AngleVector[i] ≠ 0
    return Final
MaleAdapterSUBF(OriginPoint, AngleVector, ND, EN, SubtractionLayers) :=
    Zoom ← ZoomWindow([
        OriginPoint[0] + MaleAdapterLength(ND) + zc;
        OriginPoint[1] - OR_Fitting(ND) - zc;
        OriginPoint[2] + OR_Fitting(ND)
    ], [
        OriginPoint[0] - MaleAdapterLength(ND) - zc;
        OriginPoint[1] + OR_Fitting(ND) + zc;
        OriginPoint[2] - OR_Fitting(ND)
    ])
    CylinderOutSocket ← cylinderD([OriginPoint[0] + SocketDepth(ND); OriginPoint[1]; OriginPoint[2]], OR_Fitting(ND), [OriginPoint[0]; OriginPoint[1]; OriginPoint[2]])
    CylinderOutThread ← cylinderD([OriginPoint[0]; OriginPoint[1]; OriginPoint[2]], OR(ND), [OriginPoint[0] - (MaleAdapterLength(ND) - SocketDepth(ND)); OriginPoint[1]; OriginPoint[2]])
    Union ← UnionMultiple([
        [OriginPoint[0] - (MaleAdapterLength(ND) - SocketDepth(ND)); OriginPoint[1]; OriginPoint[2]];
        [OriginPoint[0] + SocketDepth(ND); OriginPoint[1]; OriginPoint[2]]
    ])
    Rotate ← [Rotate3DLast(OriginPoint, "z", AngleVector[0]); Rotate3DLast(OriginPoint, "y", AngleVector[1])]
    Final ← stack(Zoom, CylinderOutSocket, CylinderOutThread, Union)
    for i ∈ 0 .. 1
        Final ← stack(Final, Rotate[i]) if AngleVector[i] ≠ 0
    Group ← GroupLast("DeleteMe")
    Local ← stack(Final, Group, SubtractF(SubtractionLayers, "DeleteMe"))
    CylinderInSocket ← cylinderD([OriginPoint[0] + SocketDepth(ND) + zc; OriginPoint[1]; OriginPoint[2]], OR(ND), [OriginPoint[0] - zc; OriginPoint[1]; OriginPoint[2]])
    SubtractSocket ← SubtractGeneral([[OriginPoint[0] + SocketDepth(ND); OriginPoint[1] - OR_Fitting(ND); OriginPoint[2]]], [[OriginPoint[0] + SocketDepth(ND) + zc; OriginPoint[1] - OR(ND); OriginPoint[2]]])
    CylinderInThread ← cylinderD([OriginPoint[0] + zc; OriginPoint[1]; OriginPoint[2]], ID(ND, EN)/2, [OriginPoint[0] - (MaleAdapterLength(ND) - SocketDepth(ND)) - zc; OriginPoint[1]; OriginPoint[2]])
    SubtractThread ← SubtractGeneral([[
        OriginPoint[0] - (MaleAdapterLength(ND) - SocketDepth(ND));
        OriginPoint[1] - OR(ND);
        OriginPoint[2]
    ]], [[
        OriginPoint[0] - (MaleAdapterLength(ND) - SocketDepth(ND)) - zc;
        OriginPoint[1] - ID(ND, EN)/2;
        OriginPoint[2]
    ]])
    Draw ← stack(Local, CylinderOutSocket, CylinderInSocket, SubtractSocket, CylinderOutThread, CylinderInThread, SubtractThread, Union)
    for i ∈ 0 .. 1
        Draw ← stack(Draw, Rotate[i]) if AngleVector[i]
    return Draw
# Rigid Coupling Functions
# The Origin of the coupling defines the point where the right side of the coupling transitions from the pipe to the socket. The coupling is orientated along the x-axis before any rotation occurs.
CouplingF(OriginPoint, AngleVector, ND, EN) :=
    Zoom ← ZoomWindow([
        OriginPoint[0] - CouplingLength(ND) - zc;
        OriginPoint[1] - OR_Fitting(ND) - zc;
        OriginPoint[2] + OR_Fitting(ND)
    ], [
        OriginPoint[0] + CouplingLength(ND) + zc;
        OriginPoint[1] + OR_Fitting(ND) + zc;
        OriginPoint[2] - OR_Fitting(ND)
    ])
    RightSocketOuter ← cylinderD([OriginPoint[0]; OriginPoint[1]; OriginPoint[2]], OR_Fitting(ND), [OriginPoint[0] + SocketDepth(ND); OriginPoint[1]; OriginPoint[2]])
    RightSocketInner ← cylinderD([OriginPoint[0] - zc; OriginPoint[1]; OriginPoint[2]], OR(ND), [OriginPoint[0] + SocketDepth(ND) + zc; OriginPoint[1]; OriginPoint[2]])
    SubtractRightSocket ← SubtractGeneral([[OriginPoint[0]; OriginPoint[1] - OR_Fitting(ND); OriginPoint[2]]], [[OriginPoint[0] + SocketDepth(ND) + zc; OriginPoint[1] - OR(ND); OriginPoint[2]]])
    LeftSocketOuter ← cylinderD([OriginPoint[0] - CouplingLength(ND) + SocketDepth(ND); OriginPoint[1]; OriginPoint[2]], OR_Fitting(ND), [OriginPoint[0] - CouplingLength(ND) + 2*SocketDepth(ND); OriginPoint[1]; OriginPoint[2]])
    LeftSocketInner ← cylinderD([OriginPoint[0] - CouplingLength(ND) + SocketDepth(ND) - zc; OriginPoint[1]; OriginPoint[2]], OR(ND), [OriginPoint[0] - CouplingLength(ND) + 2*SocketDepth(ND) + zc; OriginPoint[1]; OriginPoint[2]])
    SubtractLeftSocket ← SubtractGeneral([[
        OriginPoint[0] - CouplingLength(ND) + SocketDepth(ND);
        OriginPoint[1] - OR_Fitting(ND);
        OriginPoint[2]
    ]], [[
        OriginPoint[0] - CouplingLength(ND) + SocketDepth(ND) - zc;
        OriginPoint[1] - OR(ND);
        OriginPoint[2]
    ]])
    PipeOuter ← cylinderD([OriginPoint[0] - CouplingLength(ND) + 2*SocketDepth(ND); OriginPoint[1]; OriginPoint[2]], OR(ND), [OriginPoint[0]; OriginPoint[1]; OriginPoint[2]])
    PipeInner ← cylinderD([OriginPoint[0] - CouplingLength(ND) + 2*SocketDepth(ND) - zc; OriginPoint[1]; OriginPoint[2]], ID(ND, EN)/2, [OriginPoint[0] + zc; OriginPoint[1]; OriginPoint[2]])
    SubtractPipe ← SubtractGeneral([[OriginPoint[0] - CouplingLength(ND) + 2*SocketDepth(ND); OriginPoint[1] - OR(ND); OriginPoint[2]]], [[
        OriginPoint[0] - CouplingLength(ND) + 2*SocketDepth(ND) - zc;
        OriginPoint[1] - ID(ND, EN)/2;
        OriginPoint[2]
    ]])
    UnionPieces ← UnionMultiple([
        [OriginPoint[0] + SocketDepth(ND); OriginPoint[1] - OR_Fitting(ND); OriginPoint[2]];
        [
            OriginPoint[0] - CouplingLength(ND) + SocketDepth(ND);
            OriginPoint[1] - OR_Fitting(ND);
            OriginPoint[2]
        ];
        [OriginPoint[0]; OriginPoint[1] - OR(ND); OriginPoint[2]]
    ])
    Rotate ← [Rotate3DLast(OriginPoint, "z", AngleVector[0]); Rotate3DLast(OriginPoint, "y", AngleVector[1])]
    Final ← stack(Zoom, RightSocketOuter, RightSocketInner, SubtractRightSocket, LeftSocketOuter, LeftSocketInner, SubtractLeftSocket, PipeOuter, PipeInner, SubtractPipe, UnionPieces)
    for i ∈ 0 .. 1
        Final ← stack(Final, Rotate[i]) if AngleVector[i] ≠ 0
    return Final
CouplingSUBF(OriginPoint, AngleVector, ND, EN, SubtractionLayers) :=
    Zoom ← ZoomWindow([
        OriginPoint[0] - CouplingLength(ND) - zc;
        OriginPoint[1] - OR_Fitting(ND) - zc;
        OriginPoint[2] + OR_Fitting(ND)
    ], [
        OriginPoint[0] + CouplingLength(ND) + zc;
        OriginPoint[1] + OR_Fitting(ND) + zc;
        OriginPoint[2] - OR_Fitting(ND)
    ])
    RightSocketOuter ← cylinderD([OriginPoint[0]; OriginPoint[1]; OriginPoint[2]], OR_Fitting(ND), [OriginPoint[0] + SocketDepth(ND); OriginPoint[1]; OriginPoint[2]])
    LeftSocketOuter ← cylinderD([OriginPoint[0] - CouplingLength(ND) + SocketDepth(ND); OriginPoint[1]; OriginPoint[2]], OR_Fitting(ND), [OriginPoint[0] - CouplingLength(ND) + 2*SocketDepth(ND); OriginPoint[1]; OriginPoint[2]])
    PipeOuter ← cylinderD([OriginPoint[0] - CouplingLength(ND) + 2*SocketDepth(ND); OriginPoint[1]; OriginPoint[2]], OR(ND), [OriginPoint[0]; OriginPoint[1]; OriginPoint[2]])
    UnionPieces ← UnionMultiple([
        [OriginPoint[0] + SocketDepth(ND); OriginPoint[1] - OR_Fitting(ND); OriginPoint[2]];
        [
            OriginPoint[0] - CouplingLength(ND) + SocketDepth(ND);
            OriginPoint[1] - OR_Fitting(ND);
            OriginPoint[2]
        ];
        [OriginPoint[0]; OriginPoint[1] - OR(ND); OriginPoint[2]]
    ])
    Rotate ← [Rotate3DLast(OriginPoint, "z", AngleVector[0]); Rotate3DLast(OriginPoint, "y", AngleVector[1])]
    Final ← stack(Zoom, RightSocketOuter, LeftSocketOuter, PipeOuter, UnionPieces)
    for i ∈ 0 .. 1
        Final ← stack(Final, Rotate[i]) if AngleVector[i]
    Group ← GroupLast("DeleteMe")
    Local ← stack(Final, Group, SubtractF(SubtractionLayers, "DeleteMe"))
    RightSocketInner ← cylinderD([OriginPoint[0] - zc; OriginPoint[1]; OriginPoint[2]], OR(ND), [OriginPoint[0] + SocketDepth(ND) + zc; OriginPoint[1]; OriginPoint[2]])
    SubtractRightSocket ← SubtractGeneral([[OriginPoint[0]; OriginPoint[1] - OR_Fitting(ND); OriginPoint[2]]], [[OriginPoint[0] + SocketDepth(ND) + zc; OriginPoint[1] - OR(ND); OriginPoint[2]]])
    LeftSocketInner ← cylinderD([OriginPoint[0] - CouplingLength(ND) + SocketDepth(ND) - zc; OriginPoint[1]; OriginPoint[2]], OR(ND), [OriginPoint[0] - CouplingLength(ND) + 2*SocketDepth(ND) + zc; OriginPoint[1]; OriginPoint[2]])
    SubtractLeftSocket ← SubtractGeneral([[
        OriginPoint[0] - CouplingLength(ND) + SocketDepth(ND);
        OriginPoint[1] - OR_Fitting(ND);
        OriginPoint[2]
    ]], [[
        OriginPoint[0] - CouplingLength(ND) + SocketDepth(ND) - zc;
        OriginPoint[1] - OR(ND);
        OriginPoint[2]
    ]])
    PipeInner ← cylinderD([OriginPoint[0] - CouplingLength(ND) + 2*SocketDepth(ND) - zc; OriginPoint[1]; OriginPoint[2]], ID(ND, EN)/2, [OriginPoint[0] + zc; OriginPoint[1]; OriginPoint[2]])
    SubtractPipe ← SubtractGeneral([[OriginPoint[0] - CouplingLength(ND) + 2*SocketDepth(ND); OriginPoint[1] - OR(ND); OriginPoint[2]]], [[
        OriginPoint[0] - CouplingLength(ND) + 2*SocketDepth(ND) - zc;
        OriginPoint[1] - ID(ND, EN)/2;
        OriginPoint[2]
    ]])
    Draw ← stack(Local, RightSocketOuter, RightSocketInner, SubtractRightSocket, LeftSocketOuter, LeftSocketInner, SubtractLeftSocket, PipeOuter, PipeInner, SubtractPipe, UnionPieces)
    for i ∈ 0 .. 1
        Draw ← stack(Draw, Rotate[i]) if AngleVector[i] ≠ 0
    return Draw
# Flexible Coupling Functions
FlexCouplingF(OriginPoint, AngleVector, ND) :=
    Zoom ← ZoomWindow([OriginPoint[0] + zc; OriginPoint[1] + zc + ORFlex(ND); OriginPoint[2]], [OriginPoint[0] - CouplingLengthFlex(ND) - zc; OriginPoint[1] - zc - ORFlex(ND); OriginPoint[2]])
    OuterCylinder ← cylinderD([OriginPoint[0]; OriginPoint[1]; OriginPoint[2]], ORFlex(ND), [OriginPoint[0] - CouplingLengthFlex(ND); OriginPoint[1]; OriginPoint[2]])
    InnerCylinder ← cylinderD([OriginPoint[0]; OriginPoint[1]; OriginPoint[2]], InnerRadiusFlex(ND), [OriginPoint[0] - CouplingLengthFlex(ND); OriginPoint[1]; OriginPoint[2]])
    Subtract ← SubtractGeneral([[OriginPoint[0]; OriginPoint[1] - ORFlex(ND); OriginPoint[2]]], [[OriginPoint[0]; OriginPoint[1] - InnerRadiusFlex(ND); OriginPoint[2]]])
    Rotate ← [Rotate3DLast(OriginPoint, "z", AngleVector[0]); Rotate3DLast(OriginPoint, "y", AngleVector[1])]
    Final ← stack(Zoom, OuterCylinder, InnerCylinder, Subtract)
    for i ∈ 0 .. 1
        Final ← stack(Final, Rotate[i]) if AngleVector[i] ≠ 0
    return Final
FlexCouplingSUBF(OriginPoint, AngleVector, ND, SubtractionLayers) :=
    Zoom ← ZoomWindow([OriginPoint[0] + zc; OriginPoint[1] + zc + ORFlex(ND); OriginPoint[2]], [OriginPoint[0] - CouplingLengthFlex(ND) - zc; OriginPoint[1] - zc - ORFlex(ND); OriginPoint[2]])
    OuterCylinder ← cylinderD([OriginPoint[0]; OriginPoint[1]; OriginPoint[2]], ORFlex(ND), [OriginPoint[0] - CouplingLengthFlex(ND); OriginPoint[1]; OriginPoint[2]])
    RotateCylinder ← [Rotate3DLast(OriginPoint, "z", AngleVector[0]); Rotate3DLast(OriginPoint, "y", AngleVector[1])]
    Final ← stack(Zoom, OuterCylinder)
    for i ∈ 0 .. 1
        Final ← stack(Final, RotateCylinder[i]) if AngleVector[i] ≠ 0
    Group ← GroupLast("DeleteMe")
    Local ← stack(Final, Group, SubtractF(SubtractionLayers, "DeleteMe"))
    DrawOuterCylinder ← cylinderD([OriginPoint[0]; OriginPoint[1]; OriginPoint[2]], ORFlex(ND), [OriginPoint[0] - CouplingLengthFlex(ND); OriginPoint[1]; OriginPoint[2]])
    DrawInnerCylinder ← cylinderD([OriginPoint[0]; OriginPoint[1]; OriginPoint[2]], InnerRadiusFlex(ND), [OriginPoint[0] - CouplingLengthFlex(ND); OriginPoint[1]; OriginPoint[2]])
    SubtractInnerCylinder ← SubtractGeneral([[OriginPoint[0]; OriginPoint[1] - ORFlex(ND); OriginPoint[2]]], [[OriginPoint[0]; OriginPoint[1] - InnerRadiusFlex(ND); OriginPoint[2]]])
    Draw ← stack(Local, DrawOuterCylinder, DrawInnerCylinder, SubtractInnerCylinder)
    for i ∈ 0 .. 1
        Draw ← stack(Draw, RotateCylinder[i]) if AngleVector[i]
    return Draw
# Fernco Coupling Functions
# Note: Although length is an argument of the Fernco coupling function because they can be cut, if you want to use the full manufacturer's length you can put FerncoCouplingLength(ND) in place of the desired length.
FerncoCouplingF(OriginPoint, AngleVector, ND, L) :=
    Zoom ← ZoomWindow([OriginPoint[0] + zc; OriginPoint[1] + zc + FerncoOuterDiameter(ND)/2; OriginPoint[2]], [
        OriginPoint[0] - CouplingLengthFlex(ND) - zc;
        OriginPoint[1] - zc - FerncoOuterDiameter(ND)/2;
        OriginPoint[2]
    ])
    OuterCylinder ← cylinderD([OriginPoint[0]; OriginPoint[1]; OriginPoint[2]], FerncoOuterDiameter(ND)/2, [OriginPoint[0] - L; OriginPoint[1]; OriginPoint[2]])
    InnerCylinder ← cylinderD([OriginPoint[0]; OriginPoint[1]; OriginPoint[2]], OR(ND), [OriginPoint[0] - L; OriginPoint[1]; OriginPoint[2]])
    Subtract ← SubtractGeneral([[OriginPoint[0]; OriginPoint[1] - FerncoOuterDiameter(ND)/2; OriginPoint[2]]], [[OriginPoint[0]; OriginPoint[1] - OR(ND); OriginPoint[2]]])
    Rotate ← [Rotate3DLast(OriginPoint, "z", AngleVector[0]); Rotate3DLast(OriginPoint, "y", AngleVector[1])]
    Final ← stack(Zoom, OuterCylinder, InnerCylinder, Subtract)
    for i ∈ 0 .. 1
        Final ← stack(Final, Rotate[i]) if AngleVector[i] ≠ 0
    return Final
# Tee Functions
# The origin defines the inner side of the center of the socket on the short end of the tee. The default orientation has the long side oriented along the x-axis and the short end oriented along the positive y-axis.
TeeF(OriginPoint, AngleVector, ND, EN) :=
    ShortPipe ← cylinderD(OriginPoint + [0 m; SocketDepth(ND); 0 m], OR_Fitting(ND), OriginPoint - [0 m; ShortTeeLength(ND); 0 m])
    LongPipe ← cylinderD([
        OriginPoint[0] + ShortTeeLength(ND) + SocketDepth(ND);
        OriginPoint[1] - ShortTeeLength(ND);
        OriginPoint[2]
    ], OR_Fitting(ND), [
        OriginPoint[0] - ShortTeeLength(ND) - SocketDepth(ND);
        OriginPoint[1] - ShortTeeLength(ND);
        OriginPoint[2]
    ])
    Zoom ← ZoomWindow([
        OriginPoint[0] - ShortTeeLength(ND) - SocketDepth(ND) - 3*zc;
        OriginPoint[1] - ShortTeeLength(ND) - OR_Fitting(ND) - zc;
        OriginPoint[2] - OR_Fitting(ND) - zc
    ], [
        OriginPoint[0] + ShortTeeLength(ND) + SocketDepth(ND) + 3*zc;
        OriginPoint[1] + SocketDepth(ND) + 2.5*zc;
        OriginPoint[2] + OR_Fitting(ND) + zc
    ])
    CylinderVert1 ← cylinderD([OriginPoint[0]; OriginPoint[1] + SocketDepth(ND) + 2*zc; OriginPoint[2]], ID(ND, EN)/2, [OriginPoint[0]; OriginPoint[1] - ShortTeeLength(ND); OriginPoint[2]])
    CylinderVert2 ← cylinderD([OriginPoint[0]; OriginPoint[1] + SocketDepth(ND) + zc; OriginPoint[2]], OD(ND)/2, [OriginPoint[0]; OriginPoint[1]; OriginPoint[2]])
    SubtractVertExcess ← SubtractGeneral([
        [OriginPoint[0] + OR_Fitting(ND); OriginPoint[1]; OriginPoint[2]];
        [
            OriginPoint[0] + ShortTeeLength(ND) + SocketDepth(ND);
            OriginPoint[1] - ShortTeeLength(ND) + OR_Fitting(ND);
            OriginPoint[2]
        ]
    ], [
        [OriginPoint[0] + OD(ND)/2; OriginPoint[1] + SocketDepth(ND) + 2*zc; OriginPoint[2]];
        [OriginPoint[0] - ID(ND, EN)/2; OriginPoint[1] + SocketDepth(ND) + zc; OriginPoint[2]]
    ])
    CylinderHoriz ← cylinderD([
        OriginPoint[0] + ShortTeeLength(ND) + SocketDepth(ND) + 2*zc;
        OriginPoint[1] - ShortTeeLength(ND);
        OriginPoint[2]
    ], ID(ND, EN)/2, [
        OriginPoint[0] - ShortTeeLength(ND) - SocketDepth(ND) - 2*zc;
        OriginPoint[1] - ShortTeeLength(ND);
        OriginPoint[2]
    ])
    CylinderHorizL ← cylinderD([
        OriginPoint[0] + (-(ShortTeeLength(ND) + zc + SocketDepth(ND)));
        OriginPoint[1] - ShortTeeLength(ND);
        OriginPoint[2]
    ], OD(ND)/2, [OriginPoint[0] - ShortTeeLength(ND); OriginPoint[1] - ShortTeeLength(ND); OriginPoint[2]])
    CylinderHorizR ← cylinderD([OriginPoint[0] + ShortTeeLength(ND); OriginPoint[1] - ShortTeeLength(ND); OriginPoint[2]], OD(ND)/2, [
        OriginPoint[0] + ShortTeeLength(ND) + SocketDepth(ND) + zc;
        OriginPoint[1] - ShortTeeLength(ND);
        OriginPoint[2]
    ])
    SubtractHorizExcess ← SubtractGeneral([[OriginPoint[0]; OriginPoint[1] + SocketDepth(ND)/2; OriginPoint[2]]], [
        [
            OriginPoint[0] + (-(ShortTeeLength(ND) + 2*zc + SocketDepth(ND)));
            OriginPoint[1] - ShortTeeLength(ND) + ID(ND, EN)/2;
            OriginPoint[2]
        ];
        [
            (OriginPoint[0] + ShortTeeLength(ND)) + SocketDepth(ND) + zc/2;
            OriginPoint[1] - ShortTeeLength(ND);
            OriginPoint[2]
        ];
        [
            OriginPoint[0] - ShortTeeLength(ND) - SocketDepth(ND) + zc/2;
            OriginPoint[1] - ShortTeeLength(ND);
            OriginPoint[2]
        ]
    ])
    Rotate ← [
        Rotate3DLast(OriginPoint, "z", AngleVector[0]);
        Rotate3DLast(OriginPoint, "y", AngleVector[1]);
        Rotate3DLast(OriginPoint, "x", AngleVector[2])
    ]
    Final ← stack(ShortPipe, LongPipe, Zoom, CylinderVert1, CylinderVert2, SubtractVertExcess, CylinderHoriz, CylinderHorizL, CylinderHorizR, SubtractHorizExcess)
    for i ∈ 0 .. 2
        Final ← stack(Final, Rotate[i]) if AngleVector[i] ≠ 0
    return Final
TeeSUBF(OriginPoint, AngleVector, ND, EN, SubtractionLayers) :=
    ShortPipe ← cylinderD(OriginPoint, OR(ND), OriginPoint - [0 m; ShortTeeLength(ND); 0 m])
    LongPipe ← cylinderD([OriginPoint[0] + ShortTeeLength(ND); OriginPoint[1] - ShortTeeLength(ND); OriginPoint[2]], OR(ND), [OriginPoint[0] - ShortTeeLength(ND); OriginPoint[1] - ShortTeeLength(ND); OriginPoint[2]])
    Zoom ← ZoomWindow([
        OriginPoint[0] - ShortTeeLength(ND) - SocketDepth(ND) - zc;
        OriginPoint[1] - ShortTeeLength(ND) - OR_Fitting(ND) - zc;
        OriginPoint[2] - OR_Fitting(ND) - zc
    ], [
        OriginPoint[0] + ShortTeeLength(ND) + SocketDepth(ND) + zc;
        OriginPoint[1] + SocketDepth(ND) + zc;
        OriginPoint[2] + OR_Fitting(ND) + zc
    ])
    CylinderVert ← cylinderD([OriginPoint[0]; OriginPoint[1] + SocketDepth(ND) + zc; OriginPoint[2]], ID(ND, EN)/2, [OriginPoint[0]; OriginPoint[1] - ShortTeeLength(ND); OriginPoint[2]])
    SubtractVertExcess ← SubtractGeneral([
        [OriginPoint[0] + OR(ND); OriginPoint[1]; OriginPoint[2]];
        [OriginPoint[0] + ShortTeeLength(ND); OriginPoint[1] - ShortTeeLength(ND) + OR(ND); OriginPoint[2]]
    ], [[OriginPoint[0] - ID(ND, EN)/2; OriginPoint[1] + SocketDepth(ND) + zc; OriginPoint[2]]])
    CylinderHoriz ← cylinderD([OriginPoint[0] + ShortTeeLength(ND) + zc; OriginPoint[1] - ShortTeeLength(ND); OriginPoint[2]], ID(ND, EN)/2, [OriginPoint[0] - ShortTeeLength(ND) - zc; OriginPoint[1] - ShortTeeLength(ND); OriginPoint[2]])
    SubtractHorizExcess ← SubtractGeneral([
        [OriginPoint[0] + OR(ND); OriginPoint[1]; OriginPoint[2]];
        [OriginPoint[0] + ShortTeeLength(ND); OriginPoint[1] - ShortTeeLength(ND) + OR(ND); OriginPoint[2]]
    ], [[
        OriginPoint[0] + ShortTeeLength(ND) + zc;
        OriginPoint[1] - ShortTeeLength(ND) - ID(ND, EN)/2;
        OriginPoint[2]
    ]])
    RightSocketOuter ← cylinderD([OriginPoint[0] + ShortTeeLength(ND); OriginPoint[1] - ShortTeeLength(ND); OriginPoint[2]], OR_Fitting(ND), [
        OriginPoint[0] + ShortTeeLength(ND) + SocketDepth(ND);
        OriginPoint[1] - ShortTeeLength(ND);
        OriginPoint[2]
    ])
    RightSocketInner ← cylinderD([OriginPoint[0] + ShortTeeLength(ND) - zc; OriginPoint[1] - ShortTeeLength(ND); OriginPoint[2]], OR(ND), [
        OriginPoint[0] + ShortTeeLength(ND) + SocketDepth(ND) + zc;
        OriginPoint[1] - ShortTeeLength(ND);
        OriginPoint[2]
    ])
    SubtractRightSocket ← SubtractGeneral([[
        OriginPoint[0] + ShortTeeLength(ND) + SocketDepth(ND);
        OriginPoint[1] - ShortTeeLength(ND) - OR_Fitting(ND);
        OriginPoint[2]
    ]], [[
        OriginPoint[0] + ShortTeeLength(ND) + SocketDepth(ND) + zc;
        OriginPoint[1] - ShortTeeLength(ND) - OR(ND) + SocketDepth(ND);
        OriginPoint[2]
    ]])
    MirrorSocketAcross ← Mirror([
        OriginPoint[0] + ShortTeeLength(ND);
        OriginPoint[1] - ShortTeeLength(ND) + SocketDepth(ND) - OR_Fitting(ND)
    ], [OriginPoint[0]; OriginPoint[1]], [OriginPoint[0]; OriginPoint[1] + zc], "n")
    MirrorSocketUp ← Mirror([
        OriginPoint[0] + ShortTeeLength(ND);
        OriginPoint[1] - ShortTeeLength(ND) + SocketDepth(ND) - OR_Fitting(ND)
    ], [OriginPoint[0]; OriginPoint[1] - ShortTeeLength(ND)], [OriginPoint[0] + zc; OriginPoint[1] - ShortTeeLength(ND) + zc], "n")
    TopSocketOuter ← cylinderD(OriginPoint, OR_Fitting(ND), OriginPoint + [0 m; SocketDepth(ND); 0 m])
    TopSocketInner ← cylinderD(OriginPoint - [0 m; zc; 0 m], OR(ND), OriginPoint + [0 m; SocketDepth(ND) + zc; 0 m])
    SubtractTopSocket ← SubtractGeneral([OriginPoint + [OR_Fitting(ND); SocketDepth(ND); 0 m]], [OriginPoint + [OR(ND); SocketDepth(ND) + zc; 0 m]])
    UnionPieces ← UnionMultiple([
        [OriginPoint[0] + OR(ND); OriginPoint[1] - 0.25*ShortTeeLength(ND); OriginPoint[2]];
        [OriginPoint[0] + OR_Fitting(ND); OriginPoint[1] + SocketDepth(ND); OriginPoint[2]];
        [
            OriginPoint[0] + 0.75*ShortTeeLength(ND);
            OriginPoint[1] - ShortTeeLength(ND) + OR(ND);
            OriginPoint[2]
        ];
        [
            OriginPoint[0] - ShortTeeLength(ND) - SocketDepth(ND);
            OriginPoint[1] - ShortTeeLength(ND) - OR_Fitting(ND);
            OriginPoint[2]
        ];
        [
            OriginPoint[0] + ShortTeeLength(ND) + SocketDepth(ND);
            OriginPoint[1] - ShortTeeLength(ND) + OR_Fitting(ND);
            OriginPoint[2]
        ]
    ])
    Rotate ← [
        Rotate3DLast(OriginPoint, "z", AngleVector[0]);
        Rotate3DLast(OriginPoint, "y", AngleVector[1]);
        Rotate3DLast(OriginPoint, "x", AngleVector[2])
    ]
    Final ← stack(ShortPipe, LongPipe, Zoom, RightSocketOuter, MirrorSocketAcross, concat(MirrorSocketUp, sp), UnionPieces)
    for i ∈ 0 .. 2
        Final ← stack(Final, Rotate[i]) if AngleVector[i] ≠ 0
    Group ← GroupLast("DeleteMe")
    Subtract ← SubtractF(SubtractionLayers, "DeleteMe")
    Draw ← stack(Final, Group, Subtract, ShortPipe, LongPipe, Zoom, CylinderVert, SubtractVertExcess, CylinderHoriz, SubtractHorizExcess, RightSocketOuter, RightSocketInner, SubtractRightSocket, MirrorSocketAcross, concat(MirrorSocketUp, sp), UnionPieces)
    for i ∈ 0 .. 2
        Draw ← stack(Draw, Rotate[i]) if AngleVector[i] ≠ 0
    return Draw
# Cut Tee Functions
CutTeeF(OriginPoint, AngleVector, H_FiSpacerSocket, ND, EN) :=
    ShortPipe ← cylinderD(OriginPoint, OR(ND), OriginPoint - [0 m; ShortTeeLength(ND); 0 m])
    LongPipe ← cylinderD([OriginPoint[0] + ShortTeeLength(ND); OriginPoint[1] - ShortTeeLength(ND); OriginPoint[2]], OR(ND), [OriginPoint[0] - ShortTeeLength(ND); OriginPoint[1] - ShortTeeLength(ND); OriginPoint[2]])
    Zoom ← ZoomWindow([
        OriginPoint[0] - ShortTeeLength(ND) - SocketDepth(ND) - zc;
        OriginPoint[1] - ShortTeeLength(ND) - OR_Fitting(ND) - zc;
        OriginPoint[2] - OR_Fitting(ND) - zc
    ], [
        OriginPoint[0] + ShortTeeLength(ND) + SocketDepth(ND) + zc;
        OriginPoint[1] + SocketDepth(ND) + zc;
        OriginPoint[2] + OR_Fitting(ND) + zc
    ])
    CylinderVert ← cylinderD([OriginPoint[0]; OriginPoint[1] + SocketDepth(ND) + zc; OriginPoint[2]], ID(ND, EN)/2, [OriginPoint[0]; OriginPoint[1] - ShortTeeLength(ND); OriginPoint[2]])
    SubtractVertExcess ← SubtractGeneral([
        [OriginPoint[0] + OR(ND); OriginPoint[1]; OriginPoint[2]];
        [
            OriginPoint[0] + ShortTeeLength(ND);
            OriginPoint[1] - ShortTeeLength(ND) + outerradius(ND);
            OriginPoint[2]
        ]
    ], [[OriginPoint[0] - ID(ND, EN)/2; OriginPoint[1] + SocketDepth(ND) + zc; OriginPoint[2]]])
    CylinderHoriz ← cylinderD([OriginPoint[0] + ShortTeeLength(ND) + zc; OriginPoint[1] - ShortTeeLength(ND); OriginPoint[2]], ID(ND, EN)/2, [OriginPoint[0] - ShortTeeLength(ND) - zc; OriginPoint[1] - ShortTeeLength(ND); OriginPoint[2]])
    SubtractHorizExcess ← SubtractGeneral([
        [OriginPoint[0] + OR(ND); OriginPoint[1]; OriginPoint[2]];
        [
            OriginPoint[0] + ShortTeeLength(ND);
            OriginPoint[1] - ShortTeeLength(ND) + outerradius(ND);
            OriginPoint[2]
        ]
    ], [[
        OriginPoint[0] + ShortTeeLength(ND) + zc;
        OriginPoint[1] - ShortTeeLength(ND) - ID(ND, EN)/2;
        OriginPoint[2]
    ]])
    RightSocketOuter ← cylinderD([OriginPoint[0] + ShortTeeLength(ND); OriginPoint[1] - ShortTeeLength(ND); OriginPoint[2]], OR_Fitting(ND), [
        OriginPoint[0] + ShortTeeLength(ND) + SocketDepth(ND);
        OriginPoint[1] - ShortTeeLength(ND);
        OriginPoint[2]
    ])
    RightSocketInner ← cylinderD([OriginPoint[0] + ShortTeeLength(ND) - zc; OriginPoint[1] - ShortTeeLength(ND); OriginPoint[2]], OR(ND), [
        OriginPoint[0] + ShortTeeLength(ND) + SocketDepth(ND) + zc;
        OriginPoint[1] - ShortTeeLength(ND);
        OriginPoint[2]
    ])
    SubtractRightSocket ← SubtractGeneral([[
        OriginPoint[0] + ShortTeeLength(ND) + SocketDepth(ND);
        OriginPoint[1] - ShortTeeLength(ND) - OR_Fitting(ND);
        OriginPoint[2]
    ]], [[
        OriginPoint[0] + ShortTeeLength(ND) + SocketDepth(ND) + zc;
        OriginPoint[1] - ShortTeeLength(ND) - OR(ND) + SocketDepth(ND);
        OriginPoint[2]
    ]])
    MirrorSocketAcross ← Mirror([
        OriginPoint[0] + ShortTeeLength(ND);
        OriginPoint[1] - ShortTeeLength(ND) + SocketDepth(ND) - OR_Fitting(ND)
    ], [OriginPoint[0]; OriginPoint[1]], [OriginPoint[0]; OriginPoint[1] + zc], "n")
    MirrorSocketUp ← Mirror([
        OriginPoint[0] + ShortTeeLength(ND);
        OriginPoint[1] - ShortTeeLength(ND) + SocketDepth(ND) - OR_Fitting(ND)
    ], [OriginPoint[0]; OriginPoint[1] - ShortTeeLength(ND)], [OriginPoint[0] + zc; OriginPoint[1] - ShortTeeLength(ND) + zc], "n")
    TopSocketOuter ← cylinderD(OriginPoint + [0 m; H_FiSpacerSocket; 0 m], OR_Fitting(ND), OriginPoint + [0 m; SocketDepth(ND); 0 m])
    TopSocketInner ← cylinderD(OriginPoint - [0 m; zc; 0 m], OR(ND), OriginPoint + [0 m; H_FiSpacerSocket + zc; 0 m])
    SubtractTopSocket ← SubtractGeneral([OriginPoint], [OriginPoint + [0 m; SocketDepth(ND); 0 m]])
    UnionPieces ← UnionMultiple([
        [OriginPoint[0] + OR(ND); OriginPoint[1] - 0.25*ShortTeeLength(ND); OriginPoint[2]];
        [OriginPoint[0] + ConRadius(ND); OriginPoint[1] + SocketDepth(ND); OriginPoint[2]];
        [
            OriginPoint[0] + 0.75*ShortTeeLength(ND);
            OriginPoint[1] - ShortTeeLength(ND) + outerradius(ND);
            OriginPoint[2]
        ];
        [
            OriginPoint[0] - ShortTeeLength(ND) - SocketDepth(ND);
            OriginPoint[1] - ShortTeeLength(ND) - ConRadius(ND);
            OriginPoint[2]
        ];
        [
            OriginPoint[0] + ShortTeeLength(ND) + SocketDepth(ND);
            OriginPoint[1] - ShortTeeLength(ND) + ConRadius(ND);
            OriginPoint[2]
        ]
    ])
    Rotate ← [
        Rotate3DLast(OriginPoint, "z", AngleVector[0]);
        Rotate3DLast(OriginPoint, "y", AngleVector[1]);
        Rotate3DLast(OriginPoint, "x", AngleVector[2])
    ]
    Final ← stack(ShortPipe, LongPipe, Zoom, CylinderVert, SubtractVertExcess, CylinderHoriz, SubtractHorizExcess, RightSocketOuter, RightSocketInner, SubtractRightSocket, MirrorSocketAcross, concat(MirrorSocketUp, sp), TopSocketOuter, SubtractTopSocket, UnionPieces)
    for i ∈ 0 .. 2
        Final ← stack(Final, Rotate[i]) if AngleVector[i] ≠ 0
    return Final
# The default orientation of the cap has the closed part facing along the positive x axis. The origin defines the inner edge of the closed part.
CapF(OriginPoint, AngleVector, ND) :=
    Zoom ← ZoomWindow([OriginPoint[0] - CapHeight(ND) - zc; OriginPoint[1] + OR_Fitting(ND); OriginPoint[2]], [OriginPoint[0] + OR_Fitting(ND); OriginPoint[1] - OR_Fitting(ND); OriginPoint[2]])
    OuterCylinder ← cylinderD(OriginPoint + [OR_Fitting(ND) - OR(ND); 0 m; 0 m], OR_Fitting(ND), OriginPoint + [OR_Fitting(ND) - OR(ND) - CapHeight(ND); 0 m; 0 m])
    InnerCylinder ← cylinderD(OriginPoint, OR(ND), OriginPoint + [OR_Fitting(ND) - OR(ND) - CapHeight(ND) - zc; 0 m; 0 m])
    SubtractInnerCylinder ← SubtractGeneral([OriginPoint + [OR_Fitting(ND) - OR(ND); -OR_Fitting(ND); 0 m]], [OriginPoint + [OR_Fitting(ND) - OR(ND) - CapHeight(ND) - zc; -OR(ND)/2; 0 m]])
    Rotate ← [Rotate3DLast(OriginPoint, "z", AngleVector[0]); Rotate3DLast(OriginPoint, "y", AngleVector[1])]
    Final ← stack(Zoom, OuterCylinder, InnerCylinder, SubtractInnerCylinder)
    for i ∈ 0 .. 1
        Final ← stack(Final, Rotate[i]) if AngleVector[i] ≠ 0
    return Final
CapSUBF(OriginPoint, AngleVector, ND, SubtractionLayers) :=
    Zoom ← ZoomWindow([OriginPoint[0] - CapHeight(ND) - zc; OriginPoint[1] + OR_Fitting(ND); OriginPoint[2]], [OriginPoint[0] + OR_Fitting(ND); OriginPoint[1] - OR_Fitting(ND); OriginPoint[2]])
    OuterCylinder ← cylinderD(OriginPoint + [OR_Fitting(ND) - OR(ND); 0 m; 0 m], OR_Fitting(ND), OriginPoint + [OR_Fitting(ND) - OR(ND) - CapHeight(ND); 0 m; 0 m])
    Rotate ← [Rotate3DLast(OriginPoint, "z", AngleVector[0]); Rotate3DLast(OriginPoint, "y", AngleVector[1])]
    Final ← stack(Zoom, OuterCylinder)
    for i ∈ 0 .. 2
        Final ← stack(Final, Rotate[i]) if AngleVector[i] ≠ 0
    Group ← GroupLast("DeleteMe")
    Local ← stack(Final, Group, SubtractF(SubtractionLayers, "DeleteMe"))
    InnerCylinder ← cylinderD(OriginPoint, OR(ND), OriginPoint + [OR_Fitting(ND) - OR(ND) - CapHeight(ND) - zc; 0 m; 0 m])
    SubtractInnerCylinder ← SubtractGeneral([OriginPoint + [OR_Fitting(ND) - OR(ND); -OR_Fitting(ND); 0 m]], [OriginPoint + [OR_Fitting(ND) - OR(ND) - CapHeight(ND) - zc; -OR(ND)/2; 0 m]])
    Draw ← stack(Local, OuterCylinder, InnerCylinder, SubtractInnerCylinder)
    for i ∈ 0 .. 1
        Draw ← stack(Draw, Rotate[i]) if AngleVector[i] ≠ 0
    return Draw
# Cap Functions
# Cut Cap Functions
# Use this if you plan to cut a cap to a specified height after you purchase it
# The default orientation of the cap has the closed part facing along the positive x axis. The origin defines the inner edge of the closed part.
CutCapF(OriginPoint, H, AngleVector, ND) :=
    Zoom ← ZoomWindow([OriginPoint[0] - H - zc; OriginPoint[1] + CapDiameter(ND)/2; OriginPoint[2]], [OriginPoint[0] + CapDiameter(ND)/2; OriginPoint[1] - CapDiameter(ND)/2; OriginPoint[2]])
    OuterCylinder ← cylinderD(OriginPoint + [CapDiameter(ND)/2 - OR(ND); 0 m; 0 m], CapDiameter(ND)/2, OriginPoint + [CapDiameter(ND)/2 - OR(ND) - H; 0 m; 0 m])
    InnerCylinder ← cylinderD(OriginPoint, OR(ND), OriginPoint + [CapDiameter(ND)/2 - OR(ND) - H - zc; 0 m; 0 m])
    SubtractInnerCylinder ← SubtractGeneral([OriginPoint + [CapDiameter(ND)/2 - OR(ND); -CapDiameter(ND)/2; 0 m]], [OriginPoint + [CapDiameter(ND)/2 - OR(ND) - H - zc; -OR(ND)/2; 0 m]])
    Rotate ← [Rotate3DLast(OriginPoint, "z", AngleVector[0]); Rotate3DLast(OriginPoint, "y", AngleVector[1])]
    Final ← stack(Zoom, OuterCylinder, InnerCylinder, SubtractInnerCylinder)
    for i ∈ 0 .. 1
        Final ← stack(Final, Rotate[i]) if AngleVector[i] ≠ 0
    return Final
CapSUBF(OriginPoint, H, AngleVector, ND, SubtractionLayers) :=
    Zoom ← ZoomWindow([OriginPoint[0] - H - zc; OriginPoint[1] + CapDiameter(ND)/2; OriginPoint[2]], [OriginPoint[0] + CapDiameter(ND)/2; OriginPoint[1] - CapDiameter(ND)/2; OriginPoint[2]])
    OuterCylinder ← cylinderD(OriginPoint + [CapDiameter(ND)/2 - OR(ND); 0 m; 0 m], CapDiameter(ND)/2, OriginPoint + [CapDiameter(ND)/2 - OR(ND) - H; 0 m; 0 m])
    Rotate ← [Rotate3DLast(OriginPoint, "z", AngleVector[0]); Rotate3DLast(OriginPoint, "y", AngleVector[1])]
    Final ← stack(Zoom, OuterCylinder)
    for i ∈ 0 .. 2
        Final ← stack(Final, Rotate[i]) if AngleVector[i] ≠ 0
    Group ← GroupLast("DeleteMe")
    Local ← stack(Final, Group, SubtractF(SubtractionLayers, "DeleteMe"))
    InnerCylinder ← cylinderD(OriginPoint, OR(ND), OriginPoint + [CapDiameter(ND)/2 - OR(ND) - H - zc; 0 m; 0 m])
    SubtractInnerCylinder ← SubtractGeneral([OriginPoint + [CapDiameter(ND)/2 - OR(ND); -CapDiameter(ND)/2; 0 m]], [OriginPoint + [CapDiameter(ND)/2 - OR(ND) - H - zc; -OR(ND)/2; 0 m]])
    Draw ← stack(Local, OuterCylinder, InnerCylinder, SubtractInnerCylinder)
    for i ∈ 0 .. 1
        Draw ← stack(Draw, Rotate[i]) if AngleVector[i] ≠ 0
    return Draw
# Launder Coupling Cap
# give the origin point as the inner center of the coupling socket
LaunderCouplingCapF(Origin, ND_Launder, EN_PipeSpec) :=
    PipeCylinder ← cylinderD(Origin, OR(ND_Launder), [-SocketDepth(ND_Launder) - CapHeight(ND_Launder); 0 m; 0 m] + Origin)
    CapCylinder ← cylinderD([-SocketDepth(ND_Launder); 0 m; 0 m] + Origin, OR_Fitting(ND_Launder), [-SocketDepth(ND_Launder) - CapHeight(ND_Launder); 0 m; 0 m] + Origin)
    HollowCouplingCap ← cylinderD([zc; 0 m; 0 m] + Origin, ID(ND_Launder, EN_PipeSpec)/2, [-SocketDepth(ND_Launder) - CapHeight(ND_Launder); 0 m; 0 m] + Origin)
    UnionPieces ← UnionMultiple([
        [0 m; OR(ND_Launder); 0 m] + Origin;
        [-SocketDepth(ND_Launder) - CapHeight(ND_Launder)/2; OR_Fitting(ND_Launder); 0 m] + Origin
    ])
    return stack(PipeCylinder, CapCylinder, HollowCouplingCap, UnionPieces)
# Cross Functions
# The default orientation of the cross has its plane of symmetry in the xy-plane, with its arms along the x and y axes. The origin defines the inside of the socket lying along the positive y-axis.
# These functions are not used in the design tool because crosses are not available in Honduras. If crosses were to become available and would then need to be coded into the plant, the function Cylinder.PRP (used in both CrossF and CrossSUBF) would need to be created in MtoATranslators or MtoATranslatorsWrapped.
CrossF(OriginPoint, AngleVector, ND, EN) :=
    VertPipe ← PipeF(OriginPoint, TeeLength(ND), [90; 0]*deg, ND, EN)
    HorizPipe ← PipeF([OriginPoint[0] + ShortTeeLength(ND); OriginPoint[1] - ShortTeeLength(ND); OriginPoint[2]], TeeLength(ND), [0; 0]*deg, ND, EN)
    Zoom ← ZoomWindow([
        OriginPoint[0] - ShortTeeLength(ND) - SocketDepth(ND) - zc;
        OriginPoint[1] - TeeLength(ND) - SocketDepth(ND) - zc;
        OriginPoint[2] - OR_Fitting(ND) - zc
    ], [
        OriginPoint[0] + ShortTeeLength(ND) + SocketDepth(ND) + zc;
        OriginPoint[1] + SocketDepth(ND) + zc;
        OriginPoint[2] + OR_Fitting(ND) + zc
    ])
    RightSocketOuter ← Cylinder_PRP([OriginPoint[0] + ShortTeeLength(ND); OriginPoint[1] - ShortTeeLength(ND); OriginPoint[2]], OR_Fitting(ND), [
        OriginPoint[0] + ShortTeeLength(ND) + SocketDepth(ND);
        OriginPoint[1] - ShortTeeLength(ND);
        OriginPoint[2]
    ])
    RightSocketInner ← Cylinder_PRP([OriginPoint[0] + ShortTeeLength(ND) - zc; OriginPoint[1] - ShortTeeLength(ND); OriginPoint[2]], OR(ND), [
        OriginPoint[0] + ShortTeeLength(ND) + SocketDepth(ND) + zc;
        OriginPoint[1] - ShortTeeLength(ND);
        OriginPoint[2]
    ])
    SubtractRightSocket ← SubtractGeneral([[
        OriginPoint[0] + ShortTeeLength(ND) + SocketDepth(ND);
        OriginPoint[1] - ShortTeeLength(ND) - OR_Fitting(ND);
        OriginPoint[2]
    ]], [[
        OriginPoint[0] + ShortTeeLength(ND) + SocketDepth(ND) + zc;
        OriginPoint[1] - ShortTeeLength(ND) - OR(ND) + SocketDepth(ND);
        OriginPoint[2]
    ]])
    MirrorSocketAcross ← Mirror([
        OriginPoint[0] + ShortTeeLength(ND);
        OriginPoint[1] - ShortTeeLength(ND) + SocketDepth(ND) - OR_Fitting(ND)
    ], [OriginPoint[0]; OriginPoint[1]], [OriginPoint[0]; OriginPoint[1] + zc], "n")
    MirrorSocketUp ← Mirror([
        OriginPoint[0] + ShortTeeLength(ND);
        OriginPoint[1] - ShortTeeLength(ND) + SocketDepth(ND) - OR_Fitting(ND)
    ], [OriginPoint[0]; OriginPoint[1] - ShortTeeLength(ND)], [OriginPoint[0] + zc; OriginPoint[1] - ShortTeeLength(ND) + zc], "n")
    MirrorSocketDown ← Mirror([
        OriginPoint[0] + ShortTeeLength(ND);
        OriginPoint[1] - ShortTeeLength(ND) + SocketDepth(ND) - OR_Fitting(ND)
    ], [OriginPoint[0]; OriginPoint[1] - ShortTeeLength(ND)], [OriginPoint[0] + zc; OriginPoint[1] - ShortTeeLength(ND) - zc], "n")
    UnionPieces ← UnionMultiple([
        [OriginPoint[0] + OR_Fitting(ND); OriginPoint[1] - TeeLength(ND) - SocketDepth(ND); OriginPoint[2]];
        [OriginPoint[0] + outerradius(ND); OriginPoint[1] - 0.5*ShortTeeLength(ND); OriginPoint[2]];
        [OriginPoint[0] + ConRadius(ND); OriginPoint[1] + SocketDepth(ND); OriginPoint[2]];
        [
            OriginPoint[0] + 0.5*ShortTeeLength(ND);
            OriginPoint[1] - ShortTeeLength(ND) + outerradius(ND);
            OriginPoint[2]
        ];
        [
            OriginPoint[0] - ShortTeeLength(ND) - SocketDepth(ND);
            OriginPoint[1] - ShortTeeLength(ND) - ConRadius(ND);
            OriginPoint[2]
        ];
        [
            OriginPoint[0] + ShortTeeLength(ND) + SocketDepth(ND);
            OriginPoint[1] - ShortTeeLength(ND) + ConRadius(ND);
            OriginPoint[2]
        ]
    ])
    CylinderHoriz ← Cylinder_PRP([OriginPoint[0] + ShortTeeLength(ND) + zc; OriginPoint[1] - ShortTeeLength(ND); OriginPoint[2]], ID(ND, EN)/2, [OriginPoint[0] - ShortTeeLength(ND) - zc; OriginPoint[1] - ShortTeeLength(ND); OriginPoint[2]])
    SubtractHorizExcess ← SubtractGeneral([[OriginPoint[0] + OR_Fitting(ND); OriginPoint[1] + SocketDepth(ND); OriginPoint[2]]], [[
        OriginPoint[0] + ShortTeeLength(ND) + zc;
        OriginPoint[1] - ShortTeeLength(ND) - ID(ND, EN)/2;
        OriginPoint[2]
    ]])
    CylinderVert ← Cylinder_PRP([OriginPoint[0]; OriginPoint[1] + SocketDepth(ND) + zc; OriginPoint[2]], ID(ND, EN)/2, [OriginPoint[0]; OriginPoint[1] - SocketDepth(ND) - TeeLength(ND) - zc; OriginPoint[2]])
    SubtractVertExcess ← SubtractGeneral([[OriginPoint[0] + OR_Fitting(ND); OriginPoint[1] + SocketDepth(ND); OriginPoint[2]]], [[OriginPoint[0] - ID(ND, EN)/2; OriginPoint[1] + SocketDepth(ND) + zc; OriginPoint[2]]])
    Rotate ← [
        Rotate3DLast(OriginPoint, "z", AngleVector[0]);
        Rotate3DLast(OriginPoint, "y", AngleVector[1]);
        Rotate3DLast(OriginPoint, "x", AngleVector[2])
    ]
    Final ← stack(VertPipe, HorizPipe, Zoom, RightSocketOuter, RightSocketInner, SubtractRightSocket, concat(MirrorSocketAcross, MirrorSocketUp, MirrorSocketDown), UnionPieces, CylinderHoriz, SubtractHorizExcess, CylinderVert, SubtractVertExcess)
    for i ∈ 0 .. 2
        Final ← stack(Final, Rotate[i]) if AngleVector[i] ≠ 0
    return Final
CrossSUBF :=
    VertPipe ← PipeF(OriginPoint, TeeLength(ND), [90; 0]*deg, ND, EN)
    HorizPipe ← PipeF([OriginPoint[0] + ShortTeeLength(ND); OriginPoint[1] - ShortTeeLength(ND); OriginPoint[2]], TeeLength(ND), [0; 0]*deg, ND, EN)
    Zoom ← ZoomWindow([
        OriginPoint[0] - ShortTeeLength(ND) - SocketDepth(ND) - zc;
        OriginPoint[1] - TeeLength(ND) - SocketDepth(ND) - zc;
        OriginPoint[2] - OR_Fitting(ND) - zc
    ], [
        OriginPoint[0] + ShortTeeLength(ND) + SocketDepth(ND) + zc;
        OriginPoint[1] + SocketDepth(ND) + zc;
        OriginPoint[2] + OR_Fitting(ND) + zc
    ])
    RightSocketOuter ← Cylinder_PRP([OriginPoint[0] + ShortTeeLength(ND); OriginPoint[1] - ShortTeeLength(ND); OriginPoint[2]], OR_Fitting(ND), [
        OriginPoint[0] + ShortTeeLength(ND) + SocketDepth(ND);
        OriginPoint[1] - ShortTeeLength(ND);
        OriginPoint[2]
    ])
    MirrorSocketAcross ← Mirror([
        OriginPoint[0] + ShortTeeLength(ND);
        OriginPoint[1] - ShortTeeLength(ND) + SocketDepth(ND) - OR_Fitting(ND)
    ], [OriginPoint[0]; OriginPoint[1]], [OriginPoint[0]; OriginPoint[1] + zc], "n")
    MirrorSocketUp ← Mirror([
        OriginPoint[0] + ShortTeeLength(ND);
        OriginPoint[1] - ShortTeeLength(ND) + SocketDepth(ND) - OR_Fitting(ND)
    ], [OriginPoint[0]; OriginPoint[1] - ShortTeeLength(ND)], [OriginPoint[0] + zc; OriginPoint[1] - ShortTeeLength(ND) + zc], "n")
    MirrorSocketDown ← Mirror([
        OriginPoint[0] + ShortTeeLength(ND);
        OriginPoint[1] - ShortTeeLength(ND) + SocketDepth(ND) - OR_Fitting(ND)
    ], [OriginPoint[0]; OriginPoint[1] - ShortTeeLength(ND)], [OriginPoint[0] + zc; OriginPoint[1] - ShortTeeLength(ND) - zc], "n")
    UnionPieces ← UnionMultiple([
        [OriginPoint[0] + OR_Fitting(ND); OriginPoint[1] - TeeLength(ND) - SocketDepth(ND); OriginPoint[2]];
        [OriginPoint[0] + outerradius(ND); OriginPoint[1] - 0.5*ShortTeeLength(ND); OriginPoint[2]];
        [OriginPoint[0] + ConRadius(ND); OriginPoint[1] + SocketDepth(ND); OriginPoint[2]];
        [
            OriginPoint[0] + 0.5*ShortTeeLength(ND);
            OriginPoint[1] - ShortTeeLength(ND) + outerradius(ND);
            OriginPoint[2]
        ];
        [
            OriginPoint[0] - ShortTeeLength(ND) - SocketDepth(ND);
            OriginPoint[1] - ShortTeeLength(ND) - ConRadius(ND);
            OriginPoint[2]
        ];
        [
            OriginPoint[0] + ShortTeeLength(ND) + SocketDepth(ND);
            OriginPoint[1] - ShortTeeLength(ND) + ConRadius(ND);
            OriginPoint[2]
        ]
    ])
    Rotate ← [
        Rotate3DLast(OriginPoint, "z", AngleVector[0]);
        Rotate3DLast(OriginPoint, "y", AngleVector[1]);
        Rotate3DLast(OriginPoint, "x", AngleVector[2])
    ]
    Final ← stack(VertPipe, HorizPipe, Zoom, RightSocketOuter, concat(MirrorSocketAcross, MirrorSocketUp, MirrorSocketDown), UnionPieces)
    for i ∈ 0 .. 2
        Final ← stack(Final, Rotate[i]) if AngleVector[i]
    Group ← GroupLast("DeleteMe")
    Local ← stack(Final, Group, SubtractF(SubtractionLayers, "DeleteMe"))
    RightSocketInner ← Cylinder_PRP([OriginPoint[0] + ShortTeeLength(ND) - zc; OriginPoint[1] - ShortTeeLength(ND); OriginPoint[2]], OR(ND), [
        OriginPoint[0] + ShortTeeLength(ND) + SocketDepth(ND) + zc;
        OriginPoint[1] - ShortTeeLength(ND);
        OriginPoint[2]
    ])
    SubtractRightSocket ← SubtractGeneral([[
        OriginPoint[0] + ShortTeeLength(ND) + SocketDepth(ND);
        OriginPoint[1] - ShortTeeLength(ND) - OR_Fitting(ND);
        OriginPoint[2]
    ]], [[
        OriginPoint[0] + ShortTeeLength(ND) + SocketDepth(ND) + zc;
        OriginPoint[1] - ShortTeeLength(ND) - OR(ND) + SocketDepth(ND);
        OriginPoint[2]
    ]])
    CylinderHoriz ← Cylinder_PRP([OriginPoint[0] + ShortTeeLength(ND) + zc; OriginPoint[1] - ShortTeeLength(ND); OriginPoint[2]], ID(ND, EN)/2, [OriginPoint[0] - ShortTeeLength(ND) - zc; OriginPoint[1] - ShortTeeLength(ND); OriginPoint[2]])
    SubtractHorizExcess ← SubtractGeneral([[OriginPoint[0] + OR_Fitting(ND); OriginPoint[1] + SocketDepth(ND); OriginPoint[2]]], [[
        OriginPoint[0] + ShortTeeLength(ND) + zc;
        OriginPoint[1] - ShortTeeLength(ND) - ID(ND, EN)/2;
        OriginPoint[2]
    ]])
    CylinderVert ← Cylinder_PRP([OriginPoint[0]; OriginPoint[1] + SocketDepth(ND) + zc; OriginPoint[2]], ID(ND, EN)/2, [OriginPoint[0]; OriginPoint[1] - SocketDepth(ND) - TeeLength(ND) - zc; OriginPoint[2]])
    SubtractVertExcess ← SubtractGeneral([[OriginPoint[0] + OR_Fitting(ND); OriginPoint[1] + SocketDepth(ND); OriginPoint[2]]], [[OriginPoint[0] - ID(ND, EN)/2; OriginPoint[1] + SocketDepth(ND) + zc; OriginPoint[2]]])
    Final ← stack(VertPipe, HorizPipe, Zoom, RightSocketOuter, RightSocketInner, SubtractRightSocket, concat(MirrorSocketAcross, MirrorSocketUp, MirrorSocketDown), UnionPieces, CylinderHoriz, SubtractHorizExcess, CylinderVert, SubtractVertExcess)
    for i ∈ 0 .. 2
        Final ← stack(Final, Rotate[i]) if AngleVector[i] ≠ 0
    return Final
# Flexible Tubing Functions
# n.temp specifies number of divisions the parabola will use (5 is a good number, do not exceed 10)
# dir.t specifies the tangency of the inlet and outlet, in the form of a 2-point point array. e.g. (1,0,0),(0,0,-1) is read as inlet facing positive x direction, outlet facing negative z direction
# Cat.Lt is the length of the tube minus the length of the pieces fitted over the couplings
# Inlet and outlet are the inlet and outlet coordinates, corresponding to the center point directly on the end of the coupling.
# ND is the nominal diameters of the pipe, respectively
FlexTubeF(n_temp, dir_t, inlet, outlet, Cat_Lt, ND, LayerName, LayerColor) :=
    PP ← ParPointF(n_temp, dir_t, inlet, outlet, Cat_Lt)
    TP ← TanPoints(n_temp, dir_t, inlet, outlet, Cat_Lt)
    Inner ← FlexCylinderF(n_temp, dir_t, inlet, outlet, Cat_Lt, IDFlex(ND))
    Group ← GroupLast("DeleteMe")
    Layer ← layer_new(LayerName, LayerColor)
    Outer ← FlexCylinderF(n_temp, dir_t, inlet, outlet, Cat_Lt, OuterDiameterFlex(ND))
    SubtractInner ← SubtractF([LayerName], "DeleteMe")
    Mirror ← concat("mirror", sp, "g", sp, LayerName, sp, sp, "0,0", sp, "0,100", sp, "y")
    Final ← stack(Layer, Outer, FreezeLayer(LayerName), Inner, Group, SubtractInner, layer_thaw(LayerName), Mirror, FreezeLayer(LayerName))
    return Final
# Wye Functions
WyeF(OriginPoint, AngleVector, ND, EN) :=
    ShortPipe ← cylinderD(OriginPoint, OR(ND), OriginPoint + [DiagWyeLength(ND)*sin(45 deg); -DiagWyeLength(ND)*sin(45 deg); 0 m])
    LongPipe ← cylinderD(OriginPoint + [DiagWyeLength(ND)*sin(45 deg) + OR(ND)/sqrt(2); -DiagWyeLength(ND)*sin(45 deg); 0 m], OR(ND), OriginPoint + [
        DiagWyeLength(ND)*sin(45 deg) + OR(ND)/sqrt(2) - LongWyeLength(ND);
        -DiagWyeLength(ND)*sin(45 deg);
        0 m
    ])
    Zoom ← ZoomWindow([
        OriginPoint[0] - LongWyeLength(ND) - SocketDepth(ND) - zc;
        OriginPoint[1] + SocketDepth(ND) + zc;
        OriginPoint[2] - OR_Fitting(ND) - zc
    ], [
        OriginPoint[0] + LongWyeLength(ND) + SocketDepth(ND) + zc;
        OriginPoint[1] - DiagWyeLength(ND) - OR_Fitting(ND) - zc;
        OriginPoint[2] + OR_Fitting(ND) + zc
    ])
    CylinderDiag ← cylinderD(OriginPoint + [-zc; zc; 0], ID(ND, EN)/2, OriginPoint + [DiagWyeLength(ND)*sin(45 deg); -DiagWyeLength(ND)*sin(45 deg); 0 m])
    SubtractDiagExcess ← SubtractGeneral([
        [OriginPoint[0] + OR(ND)*sin(45 deg); OriginPoint[1] + OR(ND)*sin(45 deg); OriginPoint[2]];
        OriginPoint + [DiagWyeLength(ND)*sin(45 deg) + OR(ND)/sqrt(2); -DiagWyeLength(ND)*sin(45 deg); 0 m]
    ], [OriginPoint + [-zc; zc; 0]])
    CylinderHoriz ← cylinderD(OriginPoint + [DiagWyeLength(ND)*sin(45 deg) + OR(ND)/sqrt(2) + zc; -DiagWyeLength(ND)*sin(45 deg); 0 m], ID(ND, EN)/2, OriginPoint + [
        DiagWyeLength(ND)*sin(45 deg) + OR(ND)/sqrt(2) - LongWyeLength(ND) - zc;
        -DiagWyeLength(ND)*sin(45 deg);
        0 m
    ])
    SubtractHorizExcess ← SubtractGeneral([[OriginPoint[0] + OR(ND)*sin(45 deg); OriginPoint[1] + OR(ND)*sin(45 deg); OriginPoint[2]]], [OriginPoint + [DiagWyeLength(ND)*sin(45 deg) + OR(ND)/sqrt(2) + zc; -DiagWyeLength(ND)*sin(45 deg); 0 m]])
    RightSocketOuter ← cylinderD(OriginPoint + [DiagWyeLength(ND)*sin(45 deg) + OR(ND)/sqrt(2); -DiagWyeLength(ND)*sin(45 deg); 0 m], OR_Fitting(ND), OriginPoint + [
        DiagWyeLength(ND)*sin(45 deg) + OR(ND)/sqrt(2) + SocketDepth(ND);
        -DiagWyeLength(ND)*sin(45 deg);
        0 m
    ])
    RightSocketInner ← cylinderD(OriginPoint + [DiagWyeLength(ND)*sin(45 deg) + OR(ND)/sqrt(2) - zc; -DiagWyeLength(ND)*sin(45 deg); 0 m], OR(ND), OriginPoint + [
        DiagWyeLength(ND)*sin(45 deg) + OR(ND)/sqrt(2) + SocketDepth(ND) + zc;
        -DiagWyeLength(ND)*sin(45 deg);
        0 m
    ])
    SubtractRightSocket ← SubtractGeneral([OriginPoint + [
        DiagWyeLength(ND)*sin(45 deg) + OR(ND)/sqrt(2) + SocketDepth(ND);
        -DiagWyeLength(ND)*sin(45 deg) + OR_Fitting(ND);
        0 m
    ]], [OriginPoint + [
        DiagWyeLength(ND)*sin(45 deg) + OR(ND)/sqrt(2) + SocketDepth(ND) + zc;
        -DiagWyeLength(ND)*sin(45 deg) + OR(ND);
        0 m
    ]])
    LeftSocketOuter ← cylinderD(OriginPoint + [
        DiagWyeLength(ND)*sin(45 deg) + OR(ND)/sqrt(2) - LongWyeLength(ND);
        -DiagWyeLength(ND)*sin(45 deg);
        0 m
    ], OR_Fitting(ND), OriginPoint + [
        DiagWyeLength(ND)*sin(45 deg) + OR(ND)/sqrt(2) - LongWyeLength(ND) - SocketDepth(ND);
        -DiagWyeLength(ND)*sin(45 deg);
        0 m
    ])
    LeftSocketInner ← cylinderD(OriginPoint + [
        DiagWyeLength(ND)*sin(45 deg) + OR(ND)/sqrt(2) - LongWyeLength(ND) + zc;
        -DiagWyeLength(ND)*sin(45 deg);
        0 m
    ], OR(ND), OriginPoint + [
        DiagWyeLength(ND)*sin(45 deg) + OR(ND)/sqrt(2) - LongWyeLength(ND) - SocketDepth(ND) - zc;
        -DiagWyeLength(ND)*sin(45 deg);
        0 m
    ])
    SubtractLeftSocket ← SubtractGeneral([OriginPoint + [
        DiagWyeLength(ND)*sin(45 deg) + OR(ND)/sqrt(2) - LongWyeLength(ND);
        -DiagWyeLength(ND)*sin(45 deg) + OR_Fitting(ND);
        0 m
    ]], [OriginPoint + [
        DiagWyeLength(ND)*sin(45 deg) + OR(ND)/sqrt(2) - LongWyeLength(ND) - zc;
        -DiagWyeLength(ND)*sin(45 deg) + OR(ND);
        0 m
    ]])
    TopSocketOuter ← cylinderD(OriginPoint, OR_Fitting(ND), OriginPoint + [-SocketDepth(ND)*sin(45 deg); SocketDepth(ND)*sin(45 deg); 0])
    TopSocketInner ← cylinderD(OriginPoint, OR(ND), OriginPoint + [-SocketDepth(ND)*sin(45 deg) - zc; SocketDepth(ND)*sin(45 deg) + zc; 0])
    SubtractTopSocket ← SubtractGeneral([OriginPoint + [
        -SocketDepth(ND)*sin(45 deg) + OR_Fitting(ND)*sin(45 deg);
        SocketDepth(ND)*sin(45 deg) + OR_Fitting(ND)*sin(45 deg);
        0
    ]], [OriginPoint + [-zc*sin(45 deg); zc*sin(45 deg); 0]])
    UnionPieces ← UnionMultiple([
        OriginPoint + [
            -SocketDepth(ND)*sin(45 deg) + OR_Fitting(ND)*sin(45 deg);
            SocketDepth(ND)*sin(45 deg) + OR_Fitting(ND)*sin(45 deg);
            0
        ];
        OriginPoint + [
            DiagWyeLength(ND)*sin(45 deg) + OR(ND)/sqrt(2) - LongWyeLength(ND);
            -DiagWyeLength(ND)*sin(45 deg) - OR_Fitting(ND);
            0 m
        ];
        OriginPoint + [
            DiagWyeLength(ND)*sin(45 deg) + OR(ND)/sqrt(2) + SocketDepth(ND);
            -DiagWyeLength(ND)*sin(45 deg) + OR_Fitting(ND);
            0 m
        ];
        OriginPoint + [DiagWyeLength(ND)*sin(45 deg); -DiagWyeLength(ND)*sin(45 deg) - OR(ND); 0 m]
    ])
    Rotate ← [
        Rotate3DLast(OriginPoint, "z", AngleVector[0]);
        Rotate3DLast(OriginPoint, "y", AngleVector[1]);
        Rotate3DLast(OriginPoint, "x", AngleVector[2])
    ]
    Final ← stack(ShortPipe, LongPipe, Zoom, CylinderDiag, SubtractDiagExcess, CylinderHoriz, SubtractHorizExcess, RightSocketOuter, RightSocketInner, SubtractRightSocket, LeftSocketOuter, LeftSocketInner, SubtractLeftSocket, TopSocketOuter, TopSocketInner, SubtractTopSocket, UnionPieces)
    for i ∈ 0 .. 2
        Final ← stack(Final, Rotate[i]) if AngleVector[i] ≠ 0
    return Final
# Reducer Functions
# Note: before using this function please check to see that your desired ND.in and ND.out exsist as a pair.  Then check for their corresponding "ReducerLength" to use as an input.
reducerF(OriginPoint, AngleVector, ND_in, ND_out, ReducerLength, EN) :=
    Zoom ← ZoomWindow([
        OriginPoint[0] + zc + ReducerLength;
        OriginPoint[1] - OR_Fitting(ND_in) - zc;
        OriginPoint[2] - OR_Fitting(ND_in) - zc
    ], [
        OriginPoint[0] - zc - 2*ReducerLength;
        OriginPoint[1] + OR_Fitting(ND_in) + zc;
        OriginPoint[2] + OR_Fitting(ND_in) + zc
    ])
    RightSocketOuter ← cylinderD([OriginPoint[0] + SocketDepth(ND_in); OriginPoint[1]; OriginPoint[2]], OR_Fitting(ND_in), [OriginPoint[0]; OriginPoint[1]; OriginPoint[2]])
    RightSocketInner ← cylinderD([OriginPoint[0] + SocketDepth(ND_in) + zc; OriginPoint[1]; OriginPoint[2]], OR(ND_in), [OriginPoint[0]; OriginPoint[1]; OriginPoint[2]])
    SubtractRightSocket ← SubtractGeneral([[OriginPoint[0] + SocketDepth(ND_in); OriginPoint[1] + OR_Fitting(ND_in); OriginPoint[2]]], [[OriginPoint[0] + SocketDepth(ND_in) + zc; OriginPoint[1]; OriginPoint[2]]])
    LeftSocketOuter ← cylinderD([OriginPoint[0] - ReducerLength - SocketDepth(ND_out); OriginPoint[1]; OriginPoint[2]], OR_Fitting(ND_out), [OriginPoint[0] - ReducerLength; OriginPoint[1]; OriginPoint[2]])
    LeftSocketInner ← cylinderD([OriginPoint[0] - ReducerLength - SocketDepth(ND_out) - zc; OriginPoint[1]; OriginPoint[2]], OR(ND_out), [OriginPoint[0] - ReducerLength; OriginPoint[1]; OriginPoint[2]])
    SubtractLeftSocket ← SubtractGeneral([[OriginPoint[0] - ReducerLength; OriginPoint[1] - OR_Fitting(ND_out); OriginPoint[2]]], [[OriginPoint[0] - ReducerLength - SocketDepth(ND_out) - zc; OriginPoint[1]; OriginPoint[2]]])
    Slope ← (ID(ND_in, EN)/2 - ID(ND_out, EN)/2)/ReducerLength
    Ycoord ← ID(ND_in, EN)/2 - Slope*(ReducerLength + zc)
    changeView ← view("r")
    LargeOuterCircle ← circle([OriginPoint[1]; OriginPoint[2]; OriginPoint[0]], OR(ND_in))
    LargeInnerCircle ← circle([OriginPoint[1]; OriginPoint[2]; OriginPoint[0]], ID(ND_in, EN)/2)
    SmallOuterCircle ← circle([OriginPoint[1]; OriginPoint[2]; OriginPoint[0] - ReducerLength], OR(ND_out))
    SmallInnerCircle ← circle([OriginPoint[1]; OriginPoint[2]; OriginPoint[0] - ReducerLength - zc], Ycoord)
    changeViewAgain ← view("t")
    OuterCone ← Loft([OriginPoint[0]; OriginPoint[1] + OR(ND_in); OriginPoint[2]], [OriginPoint[0] - ReducerLength; OriginPoint[1] + OR(ND_out); OriginPoint[2]])
    InnerCone ← Loft([OriginPoint[0]; OriginPoint[1] + ID(ND_in, EN)/2; OriginPoint[2]], [OriginPoint[0] - ReducerLength - zc; OriginPoint[1] + Ycoord; OriginPoint[2]])
    SubtractCone ← SubtractGeneral([[OriginPoint[0]; OriginPoint[1] + OR(ND_in); OriginPoint[2]]], [[OriginPoint[0] - ReducerLength - zc; OriginPoint[1]; OriginPoint[2]]])
    UnionPieces ← UnionMultiple([
        [OriginPoint[0] + SocketDepth(ND_in)/2; OriginPoint[1] + OR(ND_in); OriginPoint[2]];
        [
            OriginPoint[0] - ReducerLength/2;
            OriginPoint[1] + ID(ND_in, EN)/2 - Slope*ReducerLength/2;
            OriginPoint[2]
        ];
        [
            OriginPoint[0] - ReducerLength - SocketDepth(ND_out)/2;
            OriginPoint[1] + OR(ND_out);
            OriginPoint[2]
        ]
    ])
    Rotate ← [
        Rotate3DLast(OriginPoint, "z", AngleVector[0]);
        Rotate3DLast(OriginPoint, "y", AngleVector[1]);
        Rotate3DLast(OriginPoint, "x", AngleVector[2])
    ]
    Final ← stack(changeView, LargeOuterCircle, LargeInnerCircle, SmallOuterCircle, SmallInnerCircle, changeViewAgain, Zoom, InnerCone, OuterCone, SubtractCone, RightSocketOuter, RightSocketInner, SubtractRightSocket, LeftSocketOuter, LeftSocketInner, SubtractLeftSocket, UnionPieces)
    for i ∈ 0 .. 2
        Final ← stack(Final, Rotate[i]) if AngleVector[i] ≠ 0
    return Final
reducerSUBF(OriginPoint, AngleVector, ND_in, ND_out, ReducerLength, EN, SubtractionLayers) :=
    Zoom ← ZoomWindow([
        OriginPoint[0] + zc + ReducerLength;
        OriginPoint[1] - OR_Fitting(ND_in) - zc;
        OriginPoint[2] - OR_Fitting(ND_in) - zc
    ], [
        OriginPoint[0] - zc - 2*ReducerLength;
        OriginPoint[1] + OR_Fitting(ND_in) + zc;
        OriginPoint[2] + OR_Fitting(ND_in) + zc
    ])
    RightSocketOuter ← cylinderD([OriginPoint[0] + SocketDepth(ND_in); OriginPoint[1]; OriginPoint[2]], OR_Fitting(ND_in), [OriginPoint[0]; OriginPoint[1]; OriginPoint[2]])
    RightSocketInner ← cylinderD([OriginPoint[0] + SocketDepth(ND_in) + zc; OriginPoint[1]; OriginPoint[2]], OR(ND_in), [OriginPoint[0]; OriginPoint[1]; OriginPoint[2]])
    SubtractRightSocket ← SubtractGeneral([[OriginPoint[0] + SocketDepth(ND_in); OriginPoint[1] + OR_Fitting(ND_in); OriginPoint[2]]], [[OriginPoint[0] + SocketDepth(ND_in) + zc; OriginPoint[1]; OriginPoint[2]]])
    LeftSocketOuter ← cylinderD([OriginPoint[0] - ReducerLength - SocketDepth(ND_out); OriginPoint[1]; OriginPoint[2]], OR_Fitting(ND_out), [OriginPoint[0] - ReducerLength; OriginPoint[1]; OriginPoint[2]])
    LeftSocketInner ← cylinderD([(OriginPoint[0] - ReducerLength - SocketDepth(ND_out)) - zc; OriginPoint[1]; OriginPoint[2]], OR(ND_out), [OriginPoint[0] - ReducerLength + zc; OriginPoint[1]; OriginPoint[2]])
    SubtractLeftSocket ← SubtractGeneral([[OriginPoint[0] - ReducerLength; OriginPoint[1] - OR_Fitting(ND_out); OriginPoint[2]]], [[
        (OriginPoint[0] - ReducerLength - SocketDepth(ND_out)) - zc;
        OriginPoint[1] + OR(ND_out);
        OriginPoint[2]
    ]])
    Slope ← (ID(ND_in, EN)/2 - ID(ND_out, EN)/2)/ReducerLength
    Ycoord ← ID(ND_in, EN)/2 - Slope*(ReducerLength + zc)
    changeView ← view("r")
    LargeOuterCircle ← circle([OriginPoint[0]; OriginPoint[1]; OriginPoint[2]], OR(ND_in))
    LargeInnerCircle ← circle([OriginPoint[0]; OriginPoint[1]; OriginPoint[2]], ID(ND_in, EN)/2)
    SmallOuterCircle ← circle([OriginPoint[0]; OriginPoint[1]; OriginPoint[2] - ReducerLength], OR(ND_out))
    SmallInnerCircle ← circle([OriginPoint[0]; OriginPoint[1]; OriginPoint[2] - ReducerLength - zc], Ycoord)
    changeViewAgain ← view("f")
    OuterCone ← Loft([OriginPoint[0]; OriginPoint[1] + OR(ND_in); OriginPoint[2]], [OriginPoint[0] - ReducerLength; OriginPoint[1] + OR(ND_out); OriginPoint[2]])
    InnerCone ← Loft([OriginPoint[0]; OriginPoint[1] + ID(ND_in, EN)/2; OriginPoint[2]], [OriginPoint[0] - ReducerLength - zc; OriginPoint[1] + Ycoord; OriginPoint[2]])
    SubtractCone ← SubtractGeneral([[OriginPoint[0]; OriginPoint[1] + OR(ND_in); OriginPoint[2]]], [[OriginPoint[0] - ReducerLength - zc; OriginPoint[1]; OriginPoint[2]]])
    UnionPieces ← UnionMultiple([
        [OriginPoint[0] + SocketDepth(ND_in)/2; OriginPoint[1] + OR(ND_in); OriginPoint[2]];
        [
            OriginPoint[0] - ReducerLength/2;
            OriginPoint[1] + innerdiameter(ND_in, EN)/2 - Slope*ReducerLength/2;
            OriginPoint[2]
        ];
        [
            OriginPoint[0] - ReducerLength - SocketDepth(ND_out)/2;
            OriginPoint[1] + outerradius(ND_out);
            OriginPoint[2]
        ]
    ])
    Rotate ← [
        Rotate3DLast(OriginPoint, "z", AngleVector[0]);
        Rotate3DLast(OriginPoint, "y", AngleVector[1]);
        Rotate3DLast(OriginPoint, "x", AngleVector[2])
    ]
    Final ← stack(Zoom, RightSocketOuter, LeftSocketOuter, changeView, LargeOuterCircle, SmallOuterCircle, changeViewAgain, OuterCone, UnionPieces)
    for i ∈ 0 .. 2
        Final ← stack(Final, Rotate[i]) if AngleVector[i] ≠ 0
    Group ← GroupLast("DeleteMe")
    Subtract ← SubtractF(SubtractionLayers, "DeleteMe")
    Draw ← stack(Final, Group, Subtract, Zoom, RightSocketOuter, RightSocketInner, SubtractRightSocket, LeftSocketOuter, LeftSocketInner, SubtractLeftSocket, sp, changeView, LargeOuterCircle, LargeInnerCircle, SmallOuterCircle, SmallInnerCircle, changeViewAgain, InnerCone, OuterCone, SubtractCone, UnionPieces)
    for i ∈ 0 .. 2
        Draw ← stack(Draw, Rotate[i]) if AngleVector[i] ≠ 0
    return Draw
bushingReducerF(OriginPoint, AngleVector, ND_big, ND_little, EN) :=
    Zoom ← ZoomWindow([
        OriginPoint[0] + zc + 2*SocketDepth(ND_big);
        OriginPoint[1] - OR_Fitting(ND_big) - zc;
        OriginPoint[2] - OR_Fitting(ND_big) - zc
    ], [
        OriginPoint[0] - zc - 2*SocketDepth(ND_big);
        OriginPoint[1] + OR_Fitting(ND_big) + zc;
        OriginPoint[2] + OR_Fitting(ND_big) + zc
    ])
    OuterSocket ← cylinderD([OriginPoint[0] + SocketDepth(ND_big) + SocketDepth(ND_little); OriginPoint[1]; OriginPoint[2]], OR_Fitting(ND_big), [OriginPoint[0]; OriginPoint[1]; OriginPoint[2]])
    BigSocketInner ← cylinderD([OriginPoint[0] + SocketDepth(ND_big); OriginPoint[1]; OriginPoint[2]], OR(ND_big), [OriginPoint[0]; OriginPoint[1]; OriginPoint[2]])
    SubtractBigSocket ← SubtractGeneral([[OriginPoint[0] + SocketDepth(ND_big); OriginPoint[1] + OR_Fitting(ND_big); OriginPoint[2]]], [[OriginPoint[0] + SocketDepth(ND_big); OriginPoint[1]; OriginPoint[2]]])
    LittleSocketInner ← cylinderD([OriginPoint[0] + SocketDepth(ND_little) + SocketDepth(ND_big); OriginPoint[1]; OriginPoint[2]], OR(ND_little), [OriginPoint[0] + SocketDepth(ND_big); OriginPoint[1]; OriginPoint[2]])
    SubtractLittleSocket ← SubtractGeneral([[
        OriginPoint[0] + SocketDepth(ND_big) + SocketDepth(ND_little);
        OriginPoint[1] - OR_Fitting(ND_big);
        OriginPoint[2]
    ]], [[OriginPoint[0] + SocketDepth(ND_little) + SocketDepth(ND_big); OriginPoint[1]; OriginPoint[2]]])
    UnionPieces ← UnionMultiple([
        [OriginPoint[0] + SocketDepth(ND_big); OriginPoint[1] + OR(ND_big); OriginPoint[2]];
        [
            OriginPoint[0] + SocketDepth(ND_little) + SocketDepth(ND_big);
            OriginPoint[1] + outerradius(ND_little);
            OriginPoint[2]
        ]
    ])
    Rotate ← [
        Rotate3DLast(OriginPoint, "z", AngleVector[0]);
        Rotate3DLast(OriginPoint, "y", AngleVector[1]);
        Rotate3DLast(OriginPoint, "x", AngleVector[2])
    ]
    Final ← stack(Zoom, OuterSocket, BigSocketInner, SubtractBigSocket, LittleSocketInner, SubtractLittleSocket, UnionPieces)
    for i ∈ 0 .. 2
        Final ← stack(Final, Rotate[i]) if AngleVector[i] ≠ 0
    return Final
bushingReducerSUBF(OriginPoint, AngleVector, ND_big, ND_little, EN, SubtractionLayers) :=
    Zoom ← ZoomWindow([
        OriginPoint[0] + zc + 2*SocketDepth(ND_big);
        OriginPoint[1] - OR_Fitting(ND_big) - zc;
        OriginPoint[2] - OR_Fitting(ND_big) - zc
    ], [
        OriginPoint[0] - zc - 2*SocketDepth(ND_big);
        OriginPoint[1] + OR_Fitting(ND_big) + zc;
        OriginPoint[2] + OR_Fitting(ND_big) + zc
    ])
    OuterSocket ← cylinderD([OriginPoint[0] + SocketDepth(ND_big) + SocketDepth(ND_little); OriginPoint[1]; OriginPoint[2]], OR_Fitting(ND_big), [OriginPoint[0]; OriginPoint[1]; OriginPoint[2]])
    BigSocketInner ← cylinderD([OriginPoint[0] + SocketDepth(ND_big); OriginPoint[1]; OriginPoint[2]], OR(ND_big), [OriginPoint[0]; OriginPoint[1]; OriginPoint[2]])
    SubtractBigSocket ← SubtractGeneral([[OriginPoint[0] + SocketDepth(ND_big); OriginPoint[1] + OR_Fitting(ND_big); OriginPoint[2]]], [[OriginPoint[0] + SocketDepth(ND_big); OriginPoint[1]; OriginPoint[2]]])
    LittleSocketInner ← cylinderD([OriginPoint[0] + SocketDepth(ND_little) + SocketDepth(ND_big); OriginPoint[1]; OriginPoint[2]], OR(ND_little), [OriginPoint[0] + SocketDepth(ND_big); OriginPoint[1]; OriginPoint[2]])
    SubtractLittleSocket ← SubtractGeneral([[
        OriginPoint[0] + SocketDepth(ND_big) + SocketDepth(ND_little);
        OriginPoint[1] - OR_Fitting(ND_big);
        OriginPoint[2]
    ]], [[OriginPoint[0] + SocketDepth(ND_little) + SocketDepth(ND_big); OriginPoint[1]; OriginPoint[2]]])
    UnionPieces ← UnionMultiple([
        [OriginPoint[0] + SocketDepth(ND_big); OriginPoint[1] + OR(ND_big); OriginPoint[2]];
        [
            OriginPoint[0] + SocketDepth(ND_little) + SocketDepth(ND_big);
            OriginPoint[1] + outerradius(ND_little);
            OriginPoint[2]
        ]
    ])
    Rotate ← [
        Rotate3DLast(OriginPoint, "z", AngleVector[0]);
        Rotate3DLast(OriginPoint, "y", AngleVector[1]);
        Rotate3DLast(OriginPoint, "x", AngleVector[2])
    ]
    Final ← stack(Zoom, OuterSocket, BigSocketInner, SubtractBigSocket, LittleSocketInner, SubtractLittleSocket, UnionPieces)
    for i ∈ 0 .. 2
        Final ← stack(Final, Rotate[i]) if AngleVector[i] ≠ 0
    Group ← GroupLast("DeleteMe")
    Subtract ← SubtractF(SubtractionLayers, "DeleteMe")
    Draw ← stack(Final, Group, Subtract, Zoom, OuterSocket, BigSocketInner, SubtractBigSocket, LittleSocketInner, SubtractLittleSocket, UnionPieces)
    for i ∈ 0 .. 2
        Draw ← stack(Draw, Rotate[i]) if AngleVector[i] ≠ 0
    return Draw
# LeverArm Bracket
LBracket2F(OriginPoint, W_LBracket, L_LBracket, T_LBracket, AngleVector) :=
    zoom ← ZoomWindow([OriginPoint[0] - 4*zc; OriginPoint[1] - T_LBracket - 4*zc; OriginPoint[2] - 4*zc], [
        OriginPoint[0] + W_LBracket + 4*zc;
        OriginPoint[1] + L_LBracket + 4*zc;
        OriginPoint[2] + L_LBracket + 4*zc
    ])
    VerticalArm ← BoxF(OriginPoint, [OriginPoint[0] + W_LBracket; OriginPoint[1] - T_LBracket; OriginPoint[2] + L_LBracket], [0; 0; 0]*deg)
    HorizontalArm ← BoxF(OriginPoint, [OriginPoint[0] + W_LBracket; OriginPoint[1] + L_LBracket; OriginPoint[2] + T_LBracket], [0; 0; 0]*deg)
    SubtractionCylinder1 ← cylinderD([
        OriginPoint[0] + W_LBracket/2;
        OriginPoint[1] - T_LBracket - zc;
        (OriginPoint[2] + L_LBracket) - L_LBracket/8
    ], 0.187 in, [OriginPoint[0] + W_LBracket/2; OriginPoint[1]; OriginPoint[2] + L_LBracket - L_LBracket/8])
    SubtractCylinder1 ← SubtractGeneral([[OriginPoint[0]; OriginPoint[1] - T_LBracket; OriginPoint[2]]], [[
        OriginPoint[0] + W_LBracket/2;
        OriginPoint[1] - T_LBracket - zc;
        OriginPoint[2] + L_LBracket - L_LBracket/8
    ]])
    SubtractionCylinder2 ← cylinderD([
        OriginPoint[0] + W_LBracket/2;
        OriginPoint[1] - T_LBracket - zc;
        OriginPoint[2] + L_LBracket - 3/4*L_LBracket
    ], W_LBracket/6, [OriginPoint[0] + W_LBracket/2; OriginPoint[1]; OriginPoint[2] + L_LBracket - 3/4*L_LBracket])
    SubtractCylinder2 ← SubtractGeneral([[OriginPoint[0]; OriginPoint[1] - T_LBracket; OriginPoint[2]]], [[
        OriginPoint[0] + W_LBracket/2;
        OriginPoint[1] - T_LBracket - zc;
        OriginPoint[2] + L_LBracket - 3/4*L_LBracket
    ]])
    SubtractionCylinder3 ← cylinderD([OriginPoint[0] + W_LBracket/2; OriginPoint[1] + L_LBracket/8; OriginPoint[2] - zc], W_LBracket/6, [OriginPoint[0] + W_LBracket/2; OriginPoint[1] + L_LBracket/8; OriginPoint[2] + T_LBracket + zc])
    SubtractCylinder3 ← SubtractGeneral([[OriginPoint[0]; OriginPoint[1] + L_LBracket; OriginPoint[2]]], [[OriginPoint[0] + W_LBracket/2; OriginPoint[1] + L_LBracket/8; OriginPoint[2] - zc]])
    SubtractionCylinder4 ← cylinderD([OriginPoint[0] + W_LBracket/2; OriginPoint[1] + 3/4*L_LBracket; OriginPoint[2]], W_LBracket/6, [OriginPoint[0] + W_LBracket/2; OriginPoint[1] + 3/4*L_LBracket; OriginPoint[2] + T_LBracket + zc])
    SubtractCylinder4 ← SubtractGeneral([[OriginPoint[0]; OriginPoint[1] + L_LBracket; OriginPoint[2]]], [[OriginPoint[0] + W_LBracket/2; OriginPoint[1] + 3/4*L_LBracket; OriginPoint[2] + T_LBracket + zc]])
    UnionPieces ← UnionMultiple([
        [OriginPoint[0]; OriginPoint[1] + L_LBracket; OriginPoint[2]];
        [OriginPoint[0]; OriginPoint[1] - T_LBracket; OriginPoint[2]]
    ])
    Rotate ← [
        Rotate3DLast(OriginPoint, "z", AngleVector[0]);
        Rotate3DLast(OriginPoint, "y", AngleVector[1]);
        Rotate3DLast(OriginPoint, "x", AngleVector[2])
    ]
    Final ← stack(zoom, VerticalArm, HorizontalArm, SubtractionCylinder1, SubtractCylinder1, SubtractionCylinder2, SubtractCylinder2, UnionPieces)
    for i ∈ 0 .. 2
        Final ← stack(Final, Rotate[i]) if AngleVector[i] ≠ 0
    return Final
# Threaded Barb
# barb points to right
TBarbF(OriginPoint, AngleVector, ND_Thread, ND_Barb, EN) :=
    T_Barb ← 1 mm
    Zoom ← ZoomWindow([
        OriginPoint[0] + zc + TBarbLength(ND_Thread, ND_Barb);
        OriginPoint[1] - OR(ND_Thread) - zc;
        OriginPoint[2] - OR(ND_Thread) - zc
    ], [
        OriginPoint[0] - zc - TBarbLength(ND_Thread, ND_Barb);
        OriginPoint[1] + OR(ND_Thread) + zc;
        OriginPoint[2] + OR(ND_Thread) + zc
    ])
    ThreadOuter ← cylinderD([OriginPoint[0] - TBarbTLength(ND_Thread); OriginPoint[1]; OriginPoint[2]], OR(ND_Thread), [OriginPoint[0] + OR_Fitting(ND_Thread) - OR(ND_Thread); OriginPoint[1]; OriginPoint[2]])
    ThreadInner ← cylinderD([OriginPoint[0] - TBarbTLength(ND_Thread) - zc; OriginPoint[1]; OriginPoint[2]], IR(ND_Thread, EN), [OriginPoint[0]; OriginPoint[1]; OriginPoint[2]])
    SubtractThread ← SubtractGeneral([[OriginPoint[0] - TBarbTLength(ND_Thread); OriginPoint[1] + OR(ND_Thread); OriginPoint[2]]], [[OriginPoint[0] - TBarbTLength(ND_Thread) - zc; OriginPoint[1] + IR(ND_Thread, EN); OriginPoint[2]]])
    BarbConnectorOuter ← cylinderD([OriginPoint[0] + TBarbBLength(ND_Barb) + T_Barb; OriginPoint[1]; OriginPoint[2]], (ND_Barb + T_Barb)/2, [OriginPoint[0]; OriginPoint[1]; OriginPoint[2]])
    BarbConnectorInner ← cylinderD([OriginPoint[0] + T_Barb + TBarbBLength(ND_Barb) + zc; OriginPoint[1]; OriginPoint[2]], ND_Barb/2, [OriginPoint[0] - zc; OriginPoint[1]; OriginPoint[2]])
    changeView ← view("r")
    ZoomRight ← ZoomWindow([
        OriginPoint[1] - OR(ND_Thread) - zc;
        OriginPoint[2] - OR(ND_Thread) - zc;
        OriginPoint[0] + zc + TBarbLength(ND_Thread, ND_Barb)
    ], [
        OriginPoint[1] + OR(ND_Thread) + zc;
        OriginPoint[2] + OR(ND_Thread) + zc;
        OriginPoint[0] - zc - TBarbLength(ND_Thread, ND_Barb)
    ])
    LargeOuterCircle ← circle([OriginPoint[1]; OriginPoint[2]; OriginPoint[0] + 0.4*TBarbBLength(ND_Barb)], 1.2*((ND_Barb + T_Barb)/2))
    SmallOuterCircle ← circle([
        OriginPoint[1];
        OriginPoint[2];
        OriginPoint[0] + TBarbBLength(ND_Barb) + (OR_Fitting(ND_Thread) - OR(ND_Thread))
    ], (ND_Barb + T_Barb)/2)
    changeViewAgain ← view("t")
    OuterCone ← Loft([
        OriginPoint[0] + (OR_Fitting(ND_Thread) - OR(ND_Thread)) + TBarbBLength(ND_Barb);
        OriginPoint[1] + (ND_Barb + T_Barb)/2;
        OriginPoint[2]
    ], [
        OriginPoint[0] + 0.4*TBarbBLength(ND_Barb);
        OriginPoint[1] + 1.2*((ND_Barb + T_Barb)/2);
        OriginPoint[2]
    ])
    SubtractCone ← SubtractGeneral([
        [OriginPoint[0] - TBarbTLength(ND_Thread); OriginPoint[1] + OR(ND_Thread); OriginPoint[2]];
        [
            OriginPoint[0] + 0.4*TBarbBLength(ND_Barb);
            OriginPoint[1] + 1.2*((ND_Barb + T_Barb)/2);
            OriginPoint[2]
        ];
        [OriginPoint[0] + TBarbBLength(ND_Barb)/2; OriginPoint[1] + ((ND_Barb + T_Barb)/2); OriginPoint[2]]
    ], [[OriginPoint[0] + TBarbBLength(ND_Barb) + zc; OriginPoint[1] + ND_Barb/2; OriginPoint[2]]])
    UnionPieces ← UnionMultiple([
        [
            OriginPoint[0] + 0.5*TBarbBLength(ND_Barb);
            OriginPoint[1] + 1.2*((ND_Barb + T_Barb)/2);
            OriginPoint[2]
        ];
        [
            OriginPoint[0] + (OR_Fitting(ND_Thread) - OR(ND_Thread)) + TBarbBLength(ND_Barb);
            OriginPoint[1] + ((ND_Barb + T_Barb)/2);
            OriginPoint[2]
        ];
        [OriginPoint[0] - TBarbTLength(ND_Thread); OriginPoint[1] + OR(ND_Thread); OriginPoint[2]]
    ])
    Rotate ← [
        Rotate3DLast(OriginPoint, "z", AngleVector[0]);
        Rotate3DLast(OriginPoint, "y", AngleVector[1]);
        Rotate3DLast(OriginPoint, "x", AngleVector[2])
    ]
    Final ← stack(Zoom, ThreadOuter, ThreadInner, SubtractThread, BarbConnectorOuter, changeView, ZoomRight, LargeOuterCircle, SmallOuterCircle, changeViewAgain, Zoom, OuterCone, BarbConnectorInner, SubtractCone, UnionPieces)
    for i ∈ 0 .. 2
        Final ← stack(Final, Rotate[i]) if AngleVector[i] ≠ 0
    return Final
