# Pumped LFSRSF System for India
# MathCAD References
# [reference: ExpertInputs.xmcd]
# Variables Changed after Expert Inputs:
HL_LfomMin := 10 cm  # Changed to 10 cm to shorten the chemical dosing tubes
HL_LfomMax := 10 cm
HL_CdcCoag := HL_LfomMin
HL_CdcChlorine := HL_LfomMin
C_CoagDoseMax := 10*mg/L
C_CoagStock := 15*gm/L
EN_Coag := 1
# This is for PACl
D_TubeAvailable := [3.175*10^-3; 4.762*10^-3; 6.35*10^-3; 7.938*10^-3; 9.525*10^-3; 0.011]*m
C_ChlorineStockMax := 3*gm/L
EN_Chlorine := 2
# Note that the ratio of stock to max dose is the same for chlorine and coagulant and that gives the same design for each doser (given that the viscosity is almost the same for both stocks).
C_ChlorineDoseMax = 2 mgm/L
# [reference: MathFunctions.xmcd]
# [reference: PipeDatabase - may.xmcd]
# [reference: MaterialsDatabase.xmcd]
# [reference: FluidsFunctions.xmcd]
# [reference: CdcFunctions.xmcd]
# Assumptions
ND_FiDrainValve := 1 in
T_TankWall := 25 cm
L_Wall := 3 m
T_EtBaffle := 5 cm
PS_Fi := 2
H_Bucket5Gal := 50 cm
T_Separator := 15 cm
W_Wall := 3 m
T_Et := 7.5 cm
V_FiUpflow := 11*mm/s
H_Freeboard := 10 cm
D_Bucket5Gal := 30 cm
L_TankOffset := 1.2 m
H_Wall := 3 m
T_FiLayer := 20 cm
S_FiInletMan := 40 cm
Z_BottomLowerTank := 6 m
Vol_OverheadTank := L_Wall*W_Wall*H_Wall
L_CdcTubeMax := L_Wall
H_UpperTankOutlet := 10 cm
S_Walkway := 60 cm
T_FiCap := 3/8*in
L_FiPipe := 205 cm
T_Platform := 15 cm
S_Walkway := 60 cm
N_FiLayer = 6
T_FiFlange := 3/8*in  # This is the aluminum plate that effectively acts as a flange
T_FiFlangeLipInner := 0.25 in
T_FiFlangeLipOuter := 0.75 in
ND_FiPipe := 12 in = 0.3048 m  # This is actual ID for 2.5 kg/cm^2 pipe
L_Cantilever := 0
A_Fi := π/4*ND_FiPipe^2 = 0.0729659 m^2
AN_FiIn := 4 cm/(outerdiameter(ND_FiPipe)*0.5) = 14.1537 deg
V_FiBw := 11*mm/s
Π_Q := 30*L/min/(14 m^3/day) = 3.08571
H_Room := 5.09 m
AN_FiOut := 180 deg - AN_FiIn
ND_CleanWaterOutlet := 1 in
Q_Fi := V_FiBw*A_Fi = 0.802625 L/s
Growth := 1.02^10 = 1.21899
ND_SystemDrain := D_pipeschedule(3*L/s, PS_Fi, Z_BottomLowerTank + H_Room, Z_BottomLowerTank + H_Room, Nu_Water, E_Pvc, K_PipeExit + K_PipeEnt + K_El90*2) = 1.5 in
Q_Cap := 72*L/day
ND_ChemPlatformDrain := D_pipeschedule(3*L/s, PS_Fi, H_Room/2, 1.2*W_Wall, Nu_Water, E_Pvc, K_PipeExit + K_PipeEnt + K_El90*3) = 1.5 in
40000 m^3 = 10566882 gal
House := 5.2
L_TransmissionGufu := 508 m
# 2 hp pump, DC motor, backup electric, backup diesel generator
# 4in transmission line
# 4 filters, one is redundant
# 25 m^3 tank, supply water more often
# tank has an internal weir
H_StaticGufu := 28 m
Households_Gufu := 70
N_PeopleGufu := 303 + 140 = 443
N_PeopleGufu := 585
Q_Gufu := N_PeopleGufu*Q_Cap*Growth = 51344 L/day
# target 5 L/min
# 6PM and 9AM supply
# 1 hr each time
# must keep storage
# stay with 25 m^3, supply more often
# 2 hp pump, DC motor
# 75 Rs / Watt
Q_SolarGufuPeakDesired := Π_Q*Q_Gufu = 6.60138 m^3/hr
Q_SolarGufuPeakDesired = 1.83372 L/s
Q_PumpMax := 42000*L/day*Π_Q = 0.0015 m^3/s  # 42000 based on water pumped each day given by selected pump
40000*L = 10566.9 gal
Vol_TankGufu := Q_Gufu*(1 day/2) = 25.672 m^3
# 3 - 9 family members
# use actual numbers
# smaller volume of tank
# wait 30 minutes in community for consumption
# distributed storage with float valve, encourages water conservation, hygiene
# 4 filters -- one is backup
N_FiMin := 2
Q_PumpMax/Q_Fi = 1.86887
5.6*m^3/hr = 1.55556 L/s
N_Fi := ceil(Q_PumpMax/Q_Fi) + 1 = 3
Q_PumpMax = 1.5 L/s
40 m^3 = 10566.9 gal
HL_FiDirty := 40 cm
# 65 taps = 45 + 20
Q_PumpMax := N_Fi*Q_Fi = 2.40787 L/s
# how much water will drain in 1 hr?
1119/1800 = 0.621667
ND_Transmission := D_pipeschedule(Q_PumpMax, PS_Fi, 2 m, L_TransmissionGufu, Nu_Water, E_Pvc, K_PipeExit + K_PipeEnt)
Power := Q_PumpMax*Rho_H2O*g*35*m/(40 %) = 2.77076 hp
ND_Transmission = 4 in
1.5/1.8 = 0.833333
ND_Transmission := 3 in
1.6 hp/(77 %) = 1549.51 W
kiloWhr := Power*8*365*hr = 6033.17 kW*hr
HL_Transmission := h_l(Q_PumpMax, ND_Transmission, L_TransmissionGufu, K_PipeExit + K_PipeEnt, Nu_Water, E_Pvc)
Q_orifice(1/8*in, 8 m, Pi_VenaContractaOrifice) = 3.74878 L/min
HL_Transmission = 2.52344 m
T_Contact := 30 min
sqrt(2*A_orifice(8*m, Pi_VenaContractaOrifice, 5*L/min)/π) = 3.26652 in/32
D_FltVlvOrificesAvail = [1.488; 2.992; 4; 4.992] in/16
h_l(Q_PumpMax, 1.5 in, 30 ft, K_PipeExit + K_PipeEnt, Nu_Water, E_Pvc)
# 2.5in pipe in 45-hh hamlet
# 12 mm tap
2 hp = 1491.4 W
W_ChlorineContact := 55 cm
2 hp*60*%/(Rho_H2O*(g*35*m)) = 2.60709 L/s
Power := 42000*L*Rho_H2O*g*35*m/(4 hr*71*%) = 1.40999 kW
3 hp/(60 %) = 3728.5 W
H_ChlorineContactWeir := T_Contact*Q_PumpMax/(W_ChlorineContact*L_Wall) = 2.62677 m
3 hp = 2.2371 kW
(12 mm)^2*π/4*45 = 50.8938 cm^2
ND_FiManTrunk := 2 in
(2.5 in)^2*π/4/45 = 0.70376 cm^2
1/16*in = 1.5875 mm
ND_FiManBranch := 1.5 in
(1/8*in)^2*π/4*65 = 5.14625 cm^2
(2.5 in)^2*π/4 = 31.6692 cm^2
Q_PumpMax = 38.1656 gal/min
h_l(12*L/s, 140 mm, 400 m, K_PipeExit + K_PipeEnt, Nu_Water, E_Pvc) = 1.96252 m
N_Fi*Q_Fi = 2.40787 L/s
h_l(12*L/s, 4 in, 2 m, (K_PipeExit + K_PipeEnt) + 3*K_El90 + 0.5, Nu_Water, E_Pvc) = 57.3928 cm
# LFOM, Entrance Tank, Distribution Tank
Q_LFOM := 3*Q_Fi  # size the LFOm for the largest flow while still staying at 3"
Q_Plant := Q_LFOM
# [reference: LFOM.xmcd]
ND_RMPipe = 4 in
# power supply for afternoon 3-4 hrs
# fill up tank, no outflow
# 6-9 supply AM, no inflow
# in 3 hrs 3/4 empty, wait for power
# fill up, no outflow
# 6-8 in PM provide service
ND_EtInlet := ND_Transmission
S_EtFloat = 0.1 m
ND_EtFloat := 6 in
L_Et := S_Fitting + 2*ConRadius(ND_RMPipe) + T_EtBaffle + ConRadius(ND_EtFloat) + S_EtFloat/2 + L_CdcLever - T_Et
W_Et := 2*ConRadius(ND_EtFloat) + S_EtFloat = 0.28415 m
L_CdcLever
L_FiDistTankMin := 2*ConRadius(ND_FiPipe)*N_FiMin + S_Walkway + (S_Walkway + S_Fitting)*ceil((N_Fi - N_FiMin)/2) + 2*ConRadius(ND_FiPipe)*(N_Fi - N_FiMin) = 2.30727 m
L_FiWeirMin := W_rectweir(Q_Plant, HL_ChannelMax) = 0.115785 m
ND_FiInlet := 3 in
ND_FiWeir := NextLargest(1.005*ND_FiInlet, AvailND)
2.7 m - 3 ft = 1.7856 m
L_FiWeirPipe := outerdiameter(ND_FiWeir)
L_FiWeirTotal := L_FiWeirPipe*N_Fi
2.4*2/3 = 1.6
W_FiDistTank := max(3*S_Fitting + 4*ConRadius(ND_FiInlet), W_ChannelMin) = 0.3532 m
2.8 m = 9.18635 ft
H_FiDistTankMin := H_HorizChannel(Q_PumpMax, W_FiDistTank, HL_ChannelMax, L_Wall, Nu_Water, E_Pvc, 0) = 0.0322971 m
1.2*2/3 = 0.8
2 m = 6.56168 ft
HL_InletOrifice := 10 cm
D_InletOrifice := sqrt((Q_Fi + Q_Fi/(N_Fi - 1))/(π*sqrt(2*g*HL_InletOrifice))) = 16.542 mm
H_OrificeBottom := 5 cm
(7*L/s/(innerdiameter(3 in, PS_Fi)^2*π/4))^2/2*Rho_H2O + 28 m*Rho_H2O*g = 39.9816 psi
HW_InnerWeir := H_OrificeBottom + D_InletOrifice/2 + HL_InletOrifice
40 psi*innerdiameter(3 in, PS_Fi)^2*π/4 = 134.13 kgf
innerdiameter(3 in, PS_Fi)^2*π/4 = 47.6945 cm^2
HL_FiWeirTotal := Headloss_weir(Q_Plant, L_FiWeirPipe*N_Fi) = 0.0242453 m
D_InletOrificeGufu := 16 mm
H_PipeWeir := HW_InnerWeir - HL_FiWeirTotal
HL_OrificeTarget := 5 cm
HW_DistTank := H_PipeWeir + HL_FiWeirTotal = 0.158271 m
N_OrificesGufu := Ceil(Q_Fi/(Pi_VenaContractaOrifice*(D_InletOrificeGufu^2*π/4)*sqrt(HL_OrificeTarget*2*g)), 1) = 7
H_FiDistTank := HW_DistTank + H_Freeboard
H_DistChanAboveFi := L_FiPipe - HW_DistTank*.60
HW_Et := HL_Lfom + CapHeight(ND_EtFloat) + S_Fitting
HL_TotalGufuOrifice := (Q_Fi/(Pi_VenaContractaOrifice*(D_InletOrificeGufu^2*π/4)*N_OrificesGufu))^2/(2*g) = 0.041777 m
H_Et := HW_Et + H_Freeboard = 0.377 m
D_InletOrificeBwGufu := 20 mm
HL_RMPipe := h_l(Q_PumpMax, ND_RMPipe, W_Wall, K_PipeExit + K_PipeEnt + 2*K_El90, Nu_Water, E_Pvc)
HL_OrificeBwTarget := 4 cm
H_DistChanBottomToEt := HW_DistTank + H_Freefall + HL_RMPipe + HL_Lfom - HW_Et = 0.099637 m
N_OrificesBwGufu := Ceil(Q_Fi/(Pi_VenaContractaOrifice*(D_InletOrificeBwGufu^2*π/4)*sqrt(HL_OrificeBwTarget*2*g)), 1) = 5
L_FiDistTank := L_Wall
ND_EtOverflow := ND_FiInlet
HL_EtOverflow := Headloss_weir(Q_Plant, π*outerdiameter(ND_EtOverflow)) = 0.0277996 m
HL_TotalGufuBwOrifice := (Q_Fi/(Pi_VenaContractaOrifice*(D_InletOrificeBwGufu^2*π/4)*N_OrificesBwGufu))^2/(2*g) = 0.0335393 m
Q_Plant := Q_PumpMax
Q_Bw := sqrt((HL_TotalGufuBwOrifice + HL_TotalGufuOrifice)*2*g)*D_InletOrificeBwGufu^2*π/4*Pi_VenaContractaOrifice*N_OrificesBwGufu
Q_Bw = 1.20276 L/s
D_InletOrificeGufu + HL_TotalGufuOrifice + D_InletOrificeBwGufu + HL_TotalGufuBwOrifice + 10 cm = 0.211316 m
# set distribution tank water level at 5cm below elbow socket and add 5cm between socket and bottom row of lfom orifices = +10cm
# Chem Doser, Storage, Calibration Columns
L_CdcCoagTube := L_CdcTube(Q_Plant, C_CoagDoseMax, C_CoagStock, D_TubeAvailable, HL_CdcCoag, L_CdcTubeMax, EN_Coag, K_CdcTube) = 1.45397 m
N_CdcCoagTubes := N_CdcTube(Q_Plant, C_CoagDoseMax, C_CoagStock, D_TubeAvailable, HL_CdcCoag, L_CdcTubeMax, EN_Coag, K_CdcTube) = 1
D_CdcCoag := D_CdcTube(Q_Plant, C_CoagDoseMax, C_CoagStock, D_TubeAvailable, HL_CdcCoag, L_CdcTubeMax, EN_Coag, K_CdcTube) = 2 in/16
(outerdiameter(1 in) - innerdiameter(1 in, PS_Fi))/2 = 3.3782 mm
Q_CoagStock := Q_Plant*C_CoagDoseMax/C_CoagStock = 1.60525 mL/s
C_CoagStock = 15 gm/L
L_CdcChlorineTube := L_CdcTube(Q_Plant, C_ChlorineDoseMax, C_ChlorineStockMax, D_TubeAvailable, HL_CdcChlorine, L_CdcTubeMax, EN_Chlorine, K_CdcTube) = 1.45981 m
N_CdcChlorineTubes := N_CdcTube(Q_Plant, C_ChlorineDoseMax, C_ChlorineStockMax, D_TubeAvailable, HL_CdcChlorine, L_CdcTubeMax, EN_Chlorine, K_CdcTube) = 1
D_CdcChlorine := D_CdcTube(Q_Plant, C_ChlorineDoseMax, C_ChlorineStockMax, D_TubeAvailable, HL_CdcChlorine, L_CdcTubeMax, EN_Chlorine, K_CdcTube) = 2 in/16
C_ChlorineStockMax = 3 gm/L
Q_ChlorineStock := Q_Plant*C_ChlorineDoseMax/C_ChlorineStockMax = 1.60525 mL/s
# [reference: ChemStorageTanks.xmcd]
D_TubeAvailable = [1; 2; 3; 4; 5; 6; 7] in/16
Vol_CoagTank = 208.198 L
H_CoagTank = 0.8509 m
R_CoagTank = 0.28575 m  # use 55 gallon drum
H_ChlorineTank = 0.8509 m
R_ChlorineTank = 0.28575 m
Vol_ChlorineTank = 208.198 L
L_ChemPlatform := 4*S_Fitting + 2*R_CoagTank + 2*R_ChlorineTank = 1.343 m
W_ChemPlatform := 2*max(R_CoagTank, R_ChlorineTank) + 2*S_Fitting + S_Walkway = 1.2715 m
D_CoagFloatValveOrifice :=
    i ← 0
    while h_orifice(D_FltVlvOrificesAvail[i], Pi_VenaContractaOrifice, Q_CoagStock) ≥ H_CoagTankAboveHeadTank
        i ← i + 1
    return D_FltVlvOrificesAvail[i]
D_CoagFloatValveOrifice = 0.093 in
HL_CoagFloatValveOrifice := h_orifice(D_CoagFloatValveOrifice, Pi_VenaContractaOrifice, Q_CoagStock) = 1.72348 cm
HL_CoagTubeStockToCHMax := H_CoagTankAboveHeadTank - HL_CoagFloatValveOrifice = 28.2765 cm
D_CoagTubeStockToCHEst := NextLargest((128*Nu_Water*1*m*Q_CoagStock/(π*g*HL_CoagTubeStockToCHMax))^(1/4), D_TubeAvailable) = 1 in/8
D_CoagTubeStockToCH := max(3/8*in, D_CoagTubeStockToCHEst) = 3 in/8
HL_CoagTubeStockToCHT := h_f(Q_CoagStock, D_CoagTubeStockToCH, 1 m, Nu_Water, E_Pvc) = 0.000810255 m
HL_CoagStockToCHT := HL_CoagFloatValveOrifice + HL_CoagTubeStockToCHT
D_ChlorineFloatValveOrifice :=
    i ← 0
    while h_orifice(D_FltVlvOrificesAvail[i], Pi_VenaContractaOrifice, Q_ChlorineStock) ≥ H_CoagTankAboveHeadTank
        i ← i + 1
    return D_FltVlvOrificesAvail[i]
D_ChlorineFloatValveOrifice = 0.093 in
HL_ChlorineFloatValveOrifice := h_orifice(D_ChlorineFloatValveOrifice, Pi_VenaContractaOrifice, Q_ChlorineStock) = 1.72348 cm
HL_ChlorineTubeStockToCHMax := H_CoagTankAboveHeadTank - HL_ChlorineFloatValveOrifice = 28.2765 cm
D_ChlorineTubeStockToCHEst := NextLargest((128*Nu_Water*1*m*Q_ChlorineStock/(π*g*HL_ChlorineTubeStockToCHMax))^(1/4), D_TubeAvailable) = 1 in/8
D_ChlorineTubeStockToCH := max(3/8*in, D_ChlorineTubeStockToCHEst) = 3 in/8
HL_ChlorTubeStockToCHT := h_f(Q_ChlorineStock, D_ChlorineTubeStockToCH, 1 m, Nu_Water, E_Pvc) = 0.000810255 m
HL_ChlorStockToCHT := HL_ChlorineFloatValveOrifice + HL_ChlorTubeStockToCHT
H_CHTToStockOutlet := max(HL_ChlorStockToCHT, HL_ChlorStockToCHT, 15 cm)
H_CHTToStockBottom := H_CHTToStockOutlet - B_StockOutlet
# Calibration Column
SF_CalCol := 1.25
Ti_Res := 1.25*min
H_CalCol := 30 cm
Q_CoagCalColMax := SF_CalCol*Q_CoagStock
Vol_CoagCalCol := Ti_Res*Q_CoagCalColMax
D_inCoagCCMin := sqrt(4*Vol_CoagCalCol/(π*H_CalCol)) = 0.994987 in
ND_CoagCalCol := NominalDiameter(D_inCoagCCMin, PS_Default)
D_inCoagCalCol := innerdiameter(ND_CoagCalCol, PS_Default) = 1.175 in
Q_ChlorCalColMax := SF_CalCol*Q_ChlorineStock
Vol_ChlorCalCol := Ti_Res*Q_ChlorCalColMax
D_inChlorCCMin := sqrt(4*Vol_ChlorCalCol/(π*H_CalCol)) = 0.994987 in
ND_ChlorCalCol := NominalDiameter(D_inChlorCCMin, PS_Default)
D_inChlorCalCol := innerdiameter(ND_ChlorCalCol, PS_Default) = 1.175 in
Z_DistributionWeir := 2 m
# AutoCAD References
# AutoCAD drawing programs:
# Translators:
# These are the codes that take MathCAD outputs and create AutoCAD scripts that are used to draw the plant (formerly Basics)
# [reference: MtoATranslators.xmcd]
# [reference: MtoATranslators.xmcd]
# The wrapped MtoA translator contains the functions that the user will want to access. These functions will draw pieces with full functionality - specifying the location, dimension, and orientation of the object. Also, it contains layer control and subtraction capabilities for grouped objects.
# [reference: MtoATranslatorsWrapped.xmcd]
# Drawing functions:
# [reference: ChannelF.xmcd]
# [reference: PlumbingF.xmcd]
# [reference: TankF.xmcd]
# [reference: StairsF.xmcd]
# Low Flow Stacked Rapid Sand Filter
Mass_Sand := N_Fi*Rho_FiSand*(1 - ε_FiSand)*innerdiameter(ND_FiPipe, PS_Fi)^2/4*π*T_FiLayer*6 = 413.352 kg
# Internal Manifold and Slot Design
Rho_FiSand*(1 - ε_FiSand)*(T_FiLayer*6)/Rho_H2O = 1.908 m
H_FiManCap := CapHeight(ND_FiManTrunk)/2
H_FiSand := T_FiLayer*N_FiLayer
L_FiManBulkheadOffset := 0.5*innerdiameter(ND_FiPipe, PS_Fi) - BulkheadSocketOuterD(ND_FiManTrunk)*0.5/tan(asin(BulkheadSocketOuterD(ND_FiManTrunk)/innerdiameter(ND_FiPipe, PS_Fi))) = 0.000991248 m
# offset of the coupling trunk from inner filter body
L_FiManCapOffset := 0.5*innerdiameter(ND_FiPipe, PS_Fi) - ConRadius(ND_FiManBranch)/tan(asin(2*ConRadius(ND_FiManBranch)/innerdiameter(ND_FiPipe, PS_Fi))) = 0.00271717 m
# offset of the cap branch from inner filter body
S_FiManBranch := 9.5 cm  # center to center
L_FiManTrunk := innerdiameter(ND_FiPipe, PS_Fi) - BulkheadLength(ND_FiManTrunk) + BulkheadThreadLength(ND_FiManTrunk) - CapThickness(ND_FiManTrunk) - L_FiManBulkheadOffset - L_FiManCapOffset = 0.28585 m
N_FiManBranch := 3  # number of branches on either side
S_FiManBranchEnds := (-(S_FiManBranch*(N_FiManBranch - 1)) + innerdiameter(ND_FiPipe, PS_Fi))/2 = 56.6126 mm
# distance from inner end of filter body to center of nearest branch
# cut coupling down
8.8 cm*2 + 4.5 cm*2 = 0.266 m
L_BranchExtend := CapHeight(ND_FiManBranch)/2
L_FiManBranch :=
    for i ∈ 0 .. N_FiManBranch - 1
        L[i] ←
            0.5*innerdiameter(ND_FiPipe, PS_Fi)*sin(acos((0.5*innerdiameter(ND_FiPipe, PS_Fi) - S_FiManBranchEnds + ConRadius(ND_FiManBranch) - S_FiManBranch*i)/(0.5*innerdiameter(ND_FiPipe, PS_Fi)))) - (0.5*innerdiameter(ND_FiManTrunk, PS_FiBranch) + CapThickness(ND_FiManBranch)) + L_BranchExtend if i < N_FiManBranch/2
            (0.5*innerdiameter(ND_FiPipe, PS_Fi) - innerdiameter(ND_FiManTrunk, PS_FiBranch)/2 - L_FiManCapOffset - CapThickness(ND_FiManBranch)) + L_BranchExtend if i + 0.5 == N_FiManBranch/2
            L[N_FiManBranch - 1 - i] otherwise
    L
L_FiManBranch = [0.0809551; 0.142012; 0.0809551] m
(innerdiameter(ND_FiPipe, PS_Fi) - outerradius(ND_FiManTrunk))/2 = 0.136531 m
# Slot Design
L_SlotsPipeAvail := 2*sum(L_FiManBranch - 0.75*CapHeight(ND_FiManBranch) - L_BranchExtend) = 0.250657 m
N_slots := 16/in
W_slots := 0.2 mm
# health, retirement, loans
L_slots := 0.6*π*innerdiameter(ND_FiManBranch, PS_Fi)/2 = 3.85417 cm
4000/60 = 66.6667
A_slots := L_SlotsPipeAvail*N_slots*W_slots*L_slots = 0.0012171 m^2
5000/60 = 83.3333
5000*7*50/60 = 29166.7
20*8 = 160
D_SlotsEquivalent := sqrt(4*A_slots/π) = 0.0393657 m
40000*12/60 = 8000
# Filtration Head Loss
H_FiSandFluidizedSafe := Pi_FiFluidized*H_FiSand + T_FiLayer
# add T.FiLayer for safety
K_tee90 := 1
K_bushing := 0.20
K_ballValve := 0.05
H_FiSandFluidizedSafe = 1.76 m
K_checkValve := 2.5
HL_FiOutPipe := h_l(Q_Fi, innerdiameter(ND_FiInlet, PS_Fi), H_FiSandFluidizedSafe, K_ballValve + 2*K_El90, Nu_Water, E_Pvc) + HL_Manifold(Q_Fi, innerdiameter(ND_FiInlet, PS_Fi), H_FiSandFluidizedSafe, 0, Nu_Water, 0, 3) = 0.418984 cm
HL_FiSlottedOut := HL_Manifold(Q_Fi/3, innerdiameter(ND_FiManTrunk, PS_Fi), L_FiManTrunk, K_checkValve + K_bushing, Nu_Water, E_Pvc, N_FiManBranch) + h_orifice(D_SlotsEquivalent*sqrt(ε_FiSand), Pi_VenaContractaOrifice, Q_Fi/3) = 3.99691 cm
HL_SandBed := h_lKozeny(20 cm, D_FiSand60, Q_Fi/(6*A_circle(innerdiameter(ND_FiPipe, PS_Fi))), ε_FiSand, Nu_Water) = 5.62001 cm
HL_FiSlottedIn := HL_Manifold(Q_Fi/4, innerdiameter(ND_FiManTrunk, PS_Fi), L_FiManTrunk, K_ballValve + K_bushing, Nu_Water, 0, N_FiManBranch) + h_orifice(D_SlotsEquivalent*sqrt(ε_FiSand), Pi_VenaContractaOrifice, Q_Fi/4) = 2.19262 cm
HL_FiInPipe := h_l(Q_Fi, innerdiameter(ND_FiInlet, PS_Fi), L_FiPipe, K_ballValve + 4*K_tee90 + 2*K_El90, Nu_Water, E_Pvc) + HL_Manifold(Q_Fi, innerdiameter(ND_FiInlet, PS_Fi), L_FiPipe, 0, Nu_Water, 0, N_FiManBranch) = 1.02157 cm
HL_Filtration := HL_FiOutPipe + HL_FiSlottedOut + HL_SandBed + HL_FiSlottedIn + HL_FiInPipe = 13.2501 cm
# Backwash Plumbing
ND_FiBwDrain := D_pipeschedule(Q_Fi, PS_Fi, (L_FiPipe - N_FiLayer*T_FiLayer)/2, L_FiPipe, Nu_Water, E_Pvc, 3*K_El90) = 1.5 in
ND_FiBwDrain := 2 in  # increase this pipe size to descrease bw headloss
H_DrainChannel := 30 cm
H_BackwashBoxes := H_DrainChannel - H_Freeboard - Headloss_weir(Q_Fi, 3*(2*S_Fitting + 2*ConRadius(ND_FiBwDrain)))
L_FiBwBulkheadOffset := 0.5*innerdiameter(ND_FiPipe, PS_Fi) - BulkheadSocketOuterD(ND_FiBwDrain)*0.5/tan(asin(BulkheadSocketOuterD(ND_FiBwDrain)/innerdiameter(ND_FiPipe, PS_Fi))) = 0.000991248 m
L_FiBwMan := innerdiameter(ND_FiPipe, PS_Fi) - L_FiBwBulkheadOffset - CapThickness(ND_FiBwDrain) - BulkheadSocketDepth(ND_FiBwDrain) = 0.291351 m
L_FiBwManAvail := L_FiBwMan - 0.5*CapHeight(ND_FiBwDrain) - BulkheadSocketDepth(ND_FiBwDrain) = 0.25864 m
B_FiBwOrificesEst := 2 cm
N_FiBwOrifices := 8
D_FiBwOrifices := innerdiameter(ND_FiBwDrain, PS_Fi)/sqrt(N_FiBwOrifices) = 1.85622 cm
B_FiBwOrifices := (L_FiBwManAvail - 1.01*D_FiBwOrifices)/(N_FiBwOrifices - 1) = 3.42703 cm
L_FiBwOrificeOffsetR := BulkheadLength(ND_FiBwDrain) + 1.01*D_FiBwOrifices - BulkheadThreadLength(ND_FiBwDrain) = 2.84462 cm
# distance of first orifice from right side of manifold
# headloss analysis during backwash
HL_FiBwSand := H_FiSand*(Rho_FiSand - Rho_H2O)*(1 - ε_FiSand)/Rho_H2O = 1.188 m
HL_BwDrain := h_l(Q_Fi, innerdiameter(ND_FiBwDrain, PS_Fi), L_FiPipe, K_El90 + K_PipeExit, Nu_Water, 0) = 0.0204274 m
HL_FiBwManUpper := HL_Manifold(Q_Fi, innerdiameter(ND_FiBwDrain, PS_Fi), L_FiBwMan, 0, Nu_Water, 0, N_FiBwOrifices) = 0.000402737 m
HL_FiBwManUpperOrifice := h_orifice(D_FiBwOrifices, Pi_VenaContractaOrifice, Q_Fi/N_FiBwOrifices) = 0.017657 m
HL_FiBwInlet := h_l(Q_Fi, innerdiameter(ND_FiInlet, PS_Fi), L_FiPipe, 3*K_El90, Nu_Water, E_Pvc) = 0.00510046 m
HL_FiBwManTrunk := HL_Manifold(Q_Fi, innerdiameter(ND_FiManTrunk, PS_FiBranch), L_FiManTrunk, K_PipeEnt, Nu_Water, 0, N_FiManBranch) = 0.00233112 m
HL_SlotOrifice := h_orifice(D_SlotsEquivalent, Pi_VenaContractaOrifice, Q_Fi) = 0.055865 m
HL_FiBwTotal := HL_FiBwSand + HL_BwDrain + HL_FiBwManUpper + HL_FiBwManUpperOrifice + HL_FiBwInlet + HL_FiBwManTrunk + HL_SlotOrifice = 1.28978 m
# startup headloss analysis
# (4 open inlets and outlfow through backwash drain)
HL_Startup := HL_FiInPipe + HL_FiSlottedIn + HL_SandBed + HL_BwDrain + HL_FiBwManUpper + HL_FiBwManUpperOrifice = 0.126829 m
# normal backwash setting
HL_StartupAlt := HL_FiBwInlet + HL_FiBwManTrunk + h_orifice(D_SlotsEquivalent*sqrt(ε_FiSand), Pi_VenaContractaOrifice, Q_Fi) + h_lKozeny(T_FiLayer*N_FiLayer*1.05, D_FiSand60, Q_Fi/(6*A_circle(innerdiameter(ND_FiPipe, PS_Fi))), ε_FiSand, Nu_Water) + (HL_BwDrain + HL_FiBwManUpper + HL_FiBwManUpperOrifice)
HL_StartupAlt = 0.749136 m
# DC pump | connect with NRV and tees
# Low Flow Stacked Rapid Sand Filter  -- AutoCAD Drawings | small generator | AC Pump
# automatic system
# AC generator as backup 3
Q_PumpMax = 38.1656 gal/min
# correction of angles
L_FiPipeInHalf := BulkheadThreadLength(ND_FiManTrunk) - L_FiManBulkheadOffset + BallValveLength(ND_FiManTrunk) - BallValveSocket(ND_FiManTrunk) + 2*SocketDepth(ND_FiInlet) + 2*SocketDepth(ND_FiManTrunk)
L_FiPipeInRest := 2*ElbowRadius(ND_FiInlet) + 2*SocketDepth(ND_FiInlet) + ElbowRadius(ND_FiInlet) + innerdiameter(ND_FiPipe, PS_Fi)/2
L_FiPipeToInletVertCenterLine := L_FiPipeInHalf + L_FiPipeInRest = 0.68574 m
L_FiPipeToOutletVertCenterLine := (cos(AN_FiIn)*L_FiPipeToInletVertCenterLine + S_Fitting + 2*ConRadius(ND_FiInlet))/cos(AN_FiIn)
X_OutletOffset := -L_FiPipeToOutletVertCenterLine*cos(AN_FiIn) + L_FiPipeToOutletVertCenterLine = 0.0255628 m
Y_OutletOffset := L_FiPipeToOutletVertCenterLine*sin(AN_FiIn) = 0.20591 m
X_InletOffset := -L_FiPipeToInletVertCenterLine*cos(AN_FiIn) + L_FiPipeToInletVertCenterLine = 0.0208167 m
Y_InletOffset := -(L_FiPipeToInletVertCenterLine*sin(AN_FiIn))
AN_Bw := 215 deg
AN_BwMod := AN_Bw - 180 deg = 35 deg
L_FiBwVertCenterLine := (L_FiPipeToInletVertCenterLine*cos(AN_FiIn) - (2*S_Fitting + ConRadius(ND_FiBwDrain) + T_Et + ConRadius(ND_FiInlet)))/cos(AN_BwMod) = 0.494404 m
# Storage Tank, Entrance Tank, Distribution Channel
FiLift := 1.07*(ShortTeeLength(ND_FiInlet) + 2*SocketDepth(ND_FiInlet) + 2*SocketDepth(ND_FiDrainValve) + BallValveLength(ND_FiDrainValve))
Tank_Origin := [0; 0; 0]*m
FlowDistributionTank_Origin := Tank_Origin + [-L_Wall + W_FiDistTank; 0; H_Wall + H_DistChanAboveFi + T_Floor + FiLift]
FlowMeteringTank_Origin := [Tank_Origin[0]; Tank_Origin[1]; FlowDistributionTank_Origin[2] + H_DistChanBottomToEt]
RoomLyr := layer_new("Room", grey)
Room := Tank(Tank_Origin + [0; 0; H_Wall + T_TankWall], [L_Wall + L_Cantilever; W_Wall; H_Room], T_TankWall)
HatchLedge := BoxF([-(W_ChemPlatform*3/4); W_Wall - 1.05*ConRadius(ND_FiInlet) - S_Fitting; H_Wall] + Tank_Origin, [
    -(W_ChemPlatform*5/4);
    W_Wall - 1.05*ConRadius(ND_FiInlet) - S_Fitting - S_Walkway;
    H_Wall + T_TankWall + S_Fitting
] + Tank_Origin, [0; 0; 0]*deg)
RoomFrz := FreezeLayer("Room")
HatchLedgeCut := BoxF([-(W_ChemPlatform*3/4) - 10 cm; W_Wall - 1.05*ConRadius(ND_FiInlet) - 3*S_Fitting; H_Wall] + Tank_Origin, [
    -(W_ChemPlatform*5/4) + 10 cm;
    W_Wall - 1.05*ConRadius(ND_FiInlet) - S_Walkway + S_Fitting;
    H_Wall + T_TankWall + S_Fitting
] + Tank_Origin, [0; 0; 0]*deg)
DrainWedge := WedgeF([-L_Wall + ConRadius(ND_SystemDrain) + outerradius(ND_SystemDrain); W_Wall; H_Wall + T_TankWall] + Tank_Origin, [
    -L_Wall + 3*ConRadius(ND_SystemDrain) + outerradius(ND_SystemDrain);
    W_Wall - 2*outerradius(ND_SystemDrain);
    H_Wall + T_TankWall - outerradius(ND_SystemDrain)
] + Tank_Origin, [270; 0; 0]*deg)
SubtractDrainWedge := SubtractF(["Room"], "DeleteMe")
HatchLyr := layer_new("StorageHatch", ltgrey)
HatchBox := BoxSUBF([
    -(W_ChemPlatform*3/4) - 5 cm;
    W_Wall - 1.05*ConRadius(ND_FiInlet) - 2*S_Fitting;
    H_Wall + T_TankWall + S_Fitting
] + Tank_Origin, [-(W_ChemPlatform*5/4) + 5 cm; W_Wall - 1.05*ConRadius(ND_FiInlet) - S_Walkway; H_Wall + T_TankWall] + Tank_Origin, [0; 0; 0]*deg, ["Room"])
HatchFrz := FreezeLayer("StorageHatch")
DoorLyr := layer_new("Door", red)
DoorBox := BoxSUBF([-W_ChemPlatform; W_Wall; H_Wall + T_TankWall + 6 cm] + Tank_Origin, [-W_ChemPlatform/2; T_TankWall + W_Wall; H_Wall + T_TankWall + 6.5 ft] + Tank_Origin, [0; 0; 0]*deg, ["Room"])
Z_DoorTop := Tank_Origin[2] + H_Wall + T_TankWall + 6.5 ft
DoorFrz := FreezeLayer("Door")
Door := stack(DoorLyr, DoorBox, DoorFrz)
StorageTankLyr := layer_new("StorageTank", grey)
6.5 ft = 1981.2 mm
FiTank := Tank(Tank_Origin, [L_Wall; W_Wall; H_Wall], T_TankWall)
FiTankWeir := BoxF([0; W_Wall - W_ChlorineContact; 0] + Tank_Origin, [-L_Wall; W_Wall - W_ChlorineContact - 15 cm; H_ChlorineContactWeir] + Tank_Origin, [0; 0; 0]*deg)
StorageTanksFrz := FreezeLayer("StorageTank")
FlowMeteringTankLyr := layer_new("FlowMeteringTank", grey)
FlowMeteringTank := Tank(FlowMeteringTank_Origin, [L_Et; W_Et; H_Et], T_Et)
FlowMeteringTankFrz := FreezeLayer("FlowMeteringTank")
BaffleLyr := layer_new("Baffle", purple)
Baffle := BoxSUBF([-2*(S_Fitting/4 + ConRadius(ND_EtOverflow)); -S_Fitting; 1.5*S_Fitting] + FlowMeteringTank_Origin, [-2*(S_Fitting/4 + ConRadius(ND_EtOverflow)) - T_SedWeir; W_Et + S_Fitting; H_Et] + FlowMeteringTank_Origin, [0; 0; 0]*deg, ["FlowMeteringTank"])
BaffleFrz := FreezeLayer("Baffle")
EtOverflowCoupling_Origin := [-ConRadius(ND_EtOverflow); ConRadius(ND_EtOverflow); -SocketDepth(ND_EtOverflow)] + FlowMeteringTank_Origin
EtOverflowElbowUnder_Origin := [
    EtOverflowCoupling_Origin[0];
    EtOverflowCoupling_Origin[1];
    FlowDistributionTank_Origin[2] - max(CouplingLength(ND_RMPipe), T_Et) - 2*SocketDepth(ND_RMPipe) - ElbowRadius(ND_RMPipe)
]
EtOverflowDrainElbow_Origin := [
    FlowDistributionTank_Origin[0] - S_Fitting - ConRadius(ND_EtOverflow) - ElbowRadius(ND_EtOverflow);
    EtOverflowElbowUnder_Origin[1];
    -2*ElbowRadius(ND_EtOverflow) + EtOverflowElbowUnder_Origin[2]
]
EtOverflowDrainFitLyr := layer_new("EtOverflowDrainFittings", green)
EtOverflowCoupling := CouplingSUBF(EtOverflowCoupling_Origin, [0; 270; 0]*deg, ND_EtOverflow, PS_Fi, ["FlowMeteringTank"])
EtOverflowElbowUnder := ElbowF(EtOverflowElbowUnder_Origin, [0; 0; 270]*deg, ND_EtOverflow, PS_Fi)
EtOverflowDrainElbow := ElbowF(EtOverflowDrainElbow_Origin, [180; 0; 270]*deg, ND_EtOverflow, PS_Fi)
EtOverflowDrainFitFrz := FreezeLayer("EtOverflowDrainFittings")
EtOverflowDrainFit := stack(EtOverflowDrainFitLyr, EtOverflowCoupling, EtOverflowElbowUnder, EtOverflowDrainElbow, EtOverflowDrainFitFrz)
EtOverflowDrainPipeLyr := layer_new("EtOverflowDrainPipes", blue)
L_EtOverflowPipe := SocketDepth(ND_EtOverflow) + H_Et - H_Freeboard + HL_EtOverflow/2
EtOverflowPipe := PipeF(EtOverflowCoupling_Origin, L_EtOverflowPipe, [0; 90; 0]*deg, ND_EtOverflow, PS_Fi)
L_EtOverflowPipeUnder := EtOverflowCoupling_Origin[2] - CouplingLength(ND_EtOverflow) + 2*SocketDepth(ND_EtOverflow) - EtOverflowElbowUnder_Origin[2]
EtOverflowPipeUnder := PipeSUBF(EtOverflowCoupling_Origin + [0; 0; -CouplingLength(ND_EtOverflow) + 2*SocketDepth(ND_EtOverflow)], L_EtOverflowPipeUnder, [0; 270; 0]*deg, ND_EtOverflow, PS_Fi, ["FlowMeteringTank"])
L_EtOverflowPipeWall := EtOverflowElbowUnder_Origin[0] - EtOverflowDrainElbow_Origin[0] - 2*ElbowRadius(ND_EtOverflow)
EtOverflowPipeWall := PipeF(EtOverflowElbowUnder_Origin + [-ElbowRadius(ND_EtOverflow); 0; -ElbowRadius(ND_EtOverflow)], L_EtOverflowPipeWall, [0; 0; 0]*deg, ND_EtOverflow, PS_Fi)
L_EtOverflowPipeDrain := EtOverflowDrainElbow_Origin[2] - Tank_Origin[2] - H_Wall - T_TankWall - H_DrainChannel
EtOverflowPipeDrain := PipeF(EtOverflowDrainElbow_Origin, EtOverflowDrainElbow_Origin[2] - Tank_Origin[2] - H_Wall - T_TankWall - H_DrainChannel, [0; 270; 0]*deg, ND_EtOverflow, PS_Fi)
EtOverflowDrainPipeFrz := FreezeLayer("EtOverflowDrainPipes")
EtOverflowDrainPipes := stack(EtOverflowDrainPipeLyr, EtOverflowPipe, EtOverflowPipeUnder, EtOverflowPipeWall, EtOverflowPipeDrain, EtOverflowDrainPipeFrz)
EtOverflow := stack(EtOverflowDrainFit, EtOverflowDrainPipes)
SystemCoupling_Origin := [
    T_Et - SocketDepth(ND_Transmission);
    W_Et - ConRadius(ND_Transmission) - S_Fitting;
    ConRadius(ND_Transmission)
] + FlowMeteringTank_Origin
SystemInletFitLyr := layer_new("SystemInletCoupling", green)
SystemInletCoupling := CouplingSUBF(SystemCoupling_Origin, [180; 0; 270]*deg, ND_Transmission, PS_Fi, ["FlowMeteringTank"])
SystemInletFitFrz := FreezeLayer("SystemInletCoupling")
SystemInletPipeLyr := layer_new("SystemInletPipes", blue)
SystemInletPipe := PipeSUBF(SystemCoupling_Origin + [W_Et; 0; 0], W_Et, [0; 0; 0]*deg, ND_Transmission, PS_Fi, ["Room"])
SystemInletPipeFrz := FreezeLayer("SystemInletPipes")
EtScript := stack(FlowMeteringTankLyr, FlowMeteringTank, FlowMeteringTankFrz, EtOverflow, BaffleLyr, Baffle, BaffleFrz, SystemInletFitLyr, SystemInletCoupling, SystemInletFitFrz, SystemInletPipeLyr, SystemInletPipe, SystemInletPipeFrz)
DistTankLyr := layer_new("FlowDistributionTank", grey)
FlowDistributionTank := Tank(FlowDistributionTank_Origin, [W_FiDistTank; L_FiDistTank; H_FiDistTank], T_Et)
DistTankFrz := FreezeLayer("FlowDistributionTank")
DistTankFitFrz := FreezeLayer("DistributionTankDrainCoupling")
DistTank := stack(DistTankLyr, FlowDistributionTank, DistTankFrz)
Tanks := stack(RoomLyr, Room, HatchLedge, RoomFrz, HatchLedgeCut, DrainWedge, GroupDelete, SubtractDrainWedge, HatchLyr, HatchBox, HatchFrz, Door, StorageTankLyr, FiTank, FiTankWeir, Union_All, StorageTanksFrz, EtScript, DistTank)
# Filter Body
FiPipe_Origin := [
    Tank_Origin[0] - L_Wall + ConRadius(ND_FiInlet) + L_FiPipeToOutletVertCenterLine*cos(AN_FiIn) + S_Fitting/4;
    FlowDistributionTank_Origin[1] + L_FiDistTank - 2*ConRadius(ND_FiInlet) - outerradius(ND_FiPipe) - 1.5*S_Fitting;
    Tank_Origin[2] + H_Wall + T_FiCap + T_Flange + T_TankWall + FiLift
] = [-2.12018; 2.66147; 3.51678] m
FiManBulkhead_Origin := [
    L_FiManBulkheadOffset - innerdiameter(ND_FiPipe, PS_Fi)/2;
    0;
    1.5*ConRadius(ND_FiManTrunk) + T_FiCap
] + FiPipe_Origin = [-2.2708; 2.66147; 3.5775] m
FiManInletPipe_Origin := [L_FiManTrunk; 0 m; 0] + FiManBulkhead_Origin
FiBranch_Origin(i) := [
    FiPipe_Origin[0] + innerdiameter(ND_FiPipe, PS_Fi)/2 - S_FiManBranchEnds - S_FiManBranch*i;
    FiPipe_Origin[1] + innerdiameter(ND_FiManTrunk, PS_FiBranch)/2 - L_BranchExtend;
    FiManInletPipe_Origin[2]
]
LayerFiBody := layer_new("FiBodyPlu", blue3)
DrawFiBody := PipeF(FiPipe_Origin, L_FiPipe, [0; 90]*deg, ND_FiPipe, PS_FiBranch)
FreezeFiBody := FreezeLayer("FiBodyPlu")
FiBodyOrificeInlet := CylinderF(FiManBulkhead_Origin + [zc; 0; 0], outerdiameter(ND_FiManTrunk)/2, CouplingLength(ND_FiManTrunk), [0; 0]*deg)
ArrayInletOrifice := ArrayLast(N_FiLayer/2 + 1, 1, T_FiLayer*2)
FiBodyOrificeOutlet := CylinderF([
    FiPipe_Origin[0] + ConRadius(ND_FiPipe) + CouplingLength(ND_FiManTrunk)/2;
    FiManBulkhead_Origin[1];
    T_FiLayer + FiManBulkhead_Origin[2]
], outerdiameter(ND_FiManTrunk)/2, CouplingLength(ND_FiManTrunk), [0; 0]*deg)
ArrayOutletOrifice := ArrayLast(N_FiLayer/2, 1, T_FiLayer*2)
# GroupDelete
SubtractFiInletsOutlets := SubtractF(["FiBodyPlu"], "DeleteMe")
FiBodyPipe := stack(LayerFiBody, DrawFiBody, FreezeFiBody)
# Internal Filter Piping
# origins in "Filter Body" section
FiManTrunkLyr := layer_new("FiManTrunkPlu", blue3)
FiManTrunk := PipeF(FiManInletPipe_Origin, L_FiManTrunk, [0; 0]*deg, ND_FiManTrunk, PS_FiBranch)
FiManTrunkFrz := FreezeLayer("FiManTrunkPlu")
D_BranchSlotOrifice := 0.96*outerdiameter(ND_FiManBranch) = 0.0463296 m
D_BranchSlotOrifice*10 = 0.463296 m
FiManTrunkOrifice := CylinderF(FiBranch_Origin(0) + [0; 1.5*ConRadius(ND_FiManTrunk); 0], D_BranchSlotOrifice/2, 3*ConRadius(ND_FiManTrunk), [90; 0]*deg)
ArrayTrunkOrifice := ArrayLast(1, N_FiManBranch, -S_FiManBranch)
# GroupDelete
SubtractFiOrifices := SubtractF(["FiManTrunkPlu"], "DeleteMe")
FiManPlu :=
    Local ← layer_new("FiManBranchPlu", blue3)
    for i ∈ 0 .. N_FiManBranch - 1
        Local ← stack(Local, PipeF(FiBranch_Origin(i), L_FiManBranch[i], [270; 0]*deg, ND_FiManBranch, PS_FiBranch))
    Local
FiManFreeze := FreezeLayer("FiMan*Plu")
DrawFiManPipes := stack(FiManTrunkLyr, FiManTrunk, FiManTrunkFrz, FiManTrunkOrifice, ArrayTrunkOrifice, GroupDelete, SubtractFiOrifices, FiManPlu, FiManFreeze)
FiManBranchCaps :=
    Local ← layer_new("FiManCapsPlu", red)
    for i ∈ 0 .. N_FiManBranch - 1
        Local ← stack(Local, CutCapF(FiBranch_Origin(i) + [0; L_FiManBranch[i]; 0], H_FiManCap, [90; 0]*deg, ND_FiManBranch))
    Local
FiManTrunkCap := CapF(FiManInletPipe_Origin, [0; 0]*deg, ND_FiManTrunk)
FiManCapFrz := FreezeLayer("FiManCapsPlu")
ThawFiManPlu := ThawMultiple(["FiManBranchPlu"; "FiManCapsPlu"])
MirrorFiMan := MirrorAll([FiPipe_Origin[0]; FiPipe_Origin[1]], [FiPipe_Origin[0] + zc; FiPipe_Origin[1]], "n")
FiManPluFrz := FreezeMultiple(["FiMan*"])
FiManBulkheadLyr := layer_new("FiManBulkheadPlu", green)
FiManBulkhead := InsertDwg(BulkheadDwg, FiManBulkhead_Origin, ND_FiManTrunk, 180 deg)
FiManBulkheadFrz := FreezeLayer("FiManBulkheadPlu")
GroupFiMan := GroupAll("FiMan")
DrawFiManFittings := stack(FiManBranchCaps, FiManTrunkCap, FiManCapFrz, ThawFiManPlu, MirrorFiMan, FiManPluFrz, FiManBulkheadLyr, FiManBulkhead, FiManBulkheadFrz, ThawMultiple(["FiMan*"]), GroupFiMan, FiManPluFrz)
ArrayFiMan :=
    Local ← stack(ThawMultiple(["FiMan*"]), Rotate_All([FiPipe_Origin[0]; FiPipe_Origin[1]], AN_FiIn), GroupFiMan)
    for i ∈ 0 .. N_FiLayer - 1
        Local ←
            stack(Local, CopyGroup("FiMan", [FiPipe_Origin[0]; FiPipe_Origin[1]; FiManBulkhead_Origin[2]], [[FiPipe_Origin[0]; FiPipe_Origin[1]; FiManBulkhead_Origin[2] + T_FiLayer*(i + 1)]]), Rotate3DLast(FiPipe_Origin, "z", -2*AN_FiIn)) if (-1)^i == 1
            stack(Local, CopyGroup("FiMan", [FiPipe_Origin[0]; FiPipe_Origin[1]; FiManBulkhead_Origin[2]], [[FiPipe_Origin[0]; FiPipe_Origin[1]; FiManBulkhead_Origin[2] + T_FiLayer*(i + 1)]])) otherwise
    Local
FrzFiMan := FreezeMultiple(["FiMan*"])
ArrayFiManifolds := stack(ArrayFiMan, FrzFiMan)
# Bed Tester
ND_FiTesterOuter := 1.5 in
ND_FiTesterInner := 1 in
L_FiTesterReducer := SocketDepth(ND_FiTesterInner)
L_FiTesterBulkheadOffset := 0.5*innerdiameter(ND_FiPipe, PS_Fi) - BulkheadSocketOuterD(ND_FiTesterOuter)*0.5/tan(asin(BulkheadSocketOuterD(ND_FiTesterOuter)/innerdiameter(ND_FiPipe, PS_Fi))) = 0.000633649 m
L_FiTesterInnerCapOffset := innerdiameter(ND_FiPipe, PS_Fi) - ConRadius(ND_FiTesterInner)/tan(asin(ConRadius(ND_FiTesterInner)/innerdiameter(ND_FiPipe, PS_Fi))) = 0.000650007 m
L_FiTesterOuter := 2*SocketDepth(ND_FiTesterOuter)
L_FiTesterInner := innerdiameter(ND_FiPipe, PS_Fi) - L_FiTesterInnerCapOffset - CapThickness(ND_FiTesterInner) + CouplingLength(ND_FiTesterOuter) + L_FiTesterReducer + CapHeight(ND_FiTesterOuter) + SocketDepth(ND_FiTesterOuter) + SocketDepth(ND_FiTesterInner)
# Draw the tester along the x-axis and then rotate it 30 deg.
FiTesterBulkhead_Origin := FiManBulkhead_Origin + [-L_FiManBulkheadOffset + L_FiTesterBulkheadOffset; 0; T_FiLayer/2]
FiTesterFemaleAdapter_Origin := FiTesterBulkhead_Origin + [-BulkheadThreadLength(ND_FiTesterOuter); 0; 0] = [-2.32432; 2.66147; 3.6775] m
FiTesterReducer_Origin := FiTesterFemaleAdapter_Origin + [-CouplingLength(ND_FiTesterOuter); 0; 0] = [-2.39655; 2.66147; 3.6775] m
FiTesterInnerCapL_Origin := FiTesterReducer_Origin + [
    SocketDepth(ND_FiTesterOuter) - L_FiTesterReducer - CapHeight(ND_FiTesterInner) + CapThickness(ND_FiTesterInner) - SocketDepth(ND_FiTesterInner) - SocketDepth(ND_FiTesterOuter);
    0;
    0
]
FiTesterInner_Origin := FiTesterInnerCapL_Origin + [L_FiTesterInner; 0; 0]
FiTesterOuter_Origin := [-CouplingLength(ND_FiTesterOuter) + 2*SocketDepth(ND_FiTesterOuter); 0; 0] + FiTesterFemaleAdapter_Origin
FiTesterLyr := layer_new("FiTesterPlu", blue)
FiTesterOuterPipe := PipeF(FiTesterOuter_Origin, L_FiTesterOuter, [0; 0], ND_FiTesterOuter, PS_Fi)
FiTesterInnerPipe := PipeF(FiTesterInner_Origin, L_FiTesterInner, [0; 0], ND_FiTesterInner, PS_Fi)
FiTesterFrz := FreezeLayer("FiTesterPlu")
FiTesterFitLyr := layer_new("FiTesterFittingsPlu", green)
FiTesterBulkhead := InsertDwg(BulkheadDwg, FiTesterBulkhead_Origin, ND_FiTesterOuter, 180 deg)
FiTesterFemaleAdapter := CouplingF(FiTesterFemaleAdapter_Origin, [0; 0]*deg, ND_FiTesterOuter, PS_Fi)
FiTesterReducer := reducerF(FiTesterReducer_Origin, [0; 0; 0]*deg, ND_FiTesterOuter, ND_FiTesterInner, L_FiTesterReducer, PS_Fi)
FiTesterCapR := CapF(FiTesterInner_Origin, [0; 0]*deg, ND_FiTesterInner)
FiTesterCapL := CapF(FiTesterInnerCapL_Origin, [180; 0]*deg, ND_FiTesterInner)
FiTesterFitFrz := FreezeLayer("FiTesterFittingsPlu")
FiTesterScript := stack(FiTesterLyr, FiTesterOuterPipe, FiTesterInnerPipe, FiTesterFrz, FiTesterFitLyr, FiTesterBulkhead, FiTesterFemaleAdapter, FiTesterReducer, FiTesterCapR, FiTesterCapL, FiTesterFitFrz, ThawMultiple(["*tester*"]), Rotate_All([FiPipe_Origin[0]; FiPipe_Origin[1]], 65 deg), FreezeMultiple(["*tester*"]))
# Filter Caps
ND_FiCapValve := 3 in
FiCapBulkhead_Origin := [0; -ConRadius(ND_FiBwDrain) - ConRadius(ND_FiCapValve); L_FiPipe + T_FiFlange] + FiPipe_Origin
FiCapValve_Origin := FiCapBulkhead_Origin + [0; 0; BulkheadThreadLength(ND_FiCapValve)]
AluminumFlangeLyr := layer_new("AluminumFlange", grey)
TopFlange := CylinderF([0; 0; L_FiPipe] + FiPipe_Origin, outerdiameter(ND_FiPipe)/2 + T_FiFlangeLipOuter, T_FiFlange, [0; 90]*deg)
BottomFlange := CylinderF([0; 0; -T_FiFlange] + FiPipe_Origin, outerdiameter(ND_FiPipe)/2 + T_FiFlangeLipOuter, T_FiFlange, [0; 90]*deg)
AluminumFlangeFrz := FreezeLayer("AluminumFlange")
TopFlangeSubtract := CylinderF([0; 0; L_FiPipe] + FiPipe_Origin, outerdiameter(ND_FiPipe)/2 - T_FiFlangeLipInner, T_FiFlange, [0; 90]*deg)
BottomFlangeSubtract := CylinderF([0; 0; -T_FiFlange] + FiPipe_Origin, outerdiameter(ND_FiPipe)/2 - T_FiFlangeLipInner, T_FiFlange, [0; 90]*deg)
SubtractFlange := SubtractF(["AluminumFlange"], "DeleteMe")
AluminumFlange := stack(AluminumFlangeLyr, TopFlange, BottomFlange, AluminumFlangeFrz, TopFlangeSubtract, BottomFlangeSubtract, GroupDelete, SubtractFlange)
FiCapLyr := layer_new("FiCap", grey)
TopCap := CylinderF([0; 0; L_FiPipe + T_FiFlange] + FiPipe_Origin, outerdiameter(ND_FiPipe)/2 + T_FiFlangeLipOuter, T_FiFlange, [0; 90]*deg)
BottomCap := CylinderF([0; 0; -T_FiFlange - T_FiCap] + FiPipe_Origin, outerdiameter(ND_FiPipe)/2 + T_FiFlangeLipOuter, T_FiFlange, [0; 90]*deg)
FiCapFrz := FreezeLayer("FiCap")
ValveAccessOrifice := CylinderF([FiPipe_Origin[0]; FiCapBulkhead_Origin[1]; L_FiPipe + T_FiFlange + FiPipe_Origin[2]], innerdiameter(ND_FiCapValve, PS_Fi)/2, T_FiFlange, [0; 90]*deg)
SubtractValveAccess := SubtractF(["FiCap"], "DeleteMe")
FiCaps := stack(FiCapLyr, TopCap, BottomCap, FiCapFrz, ValveAccessOrifice, GroupDelete, SubtractValveAccess)
S_BoltsEst := 7 in
R_Bolt := 1/4*in
L_FiBolt := (T_FiCap + T_FiFlange)*1.1
N_Bolts := ceil(2*π*(outerdiameter(ND_FiPipe)*0.5 + R_Bolt)/S_BoltsEst) = 6
N_ThreadedRods := N_Bolts/2
S_Bolts := π*innerdiameter(ND_FiPipe, PS_Fi)/N_Bolts = 0.158768 m
AN_BoltArray := 360 deg
FiCapBoltLyr := layer_new("FiCapBolt", red)
FiCapBolt := CylinderF([0.5*outerdiameter(ND_FiPipe) + R_Bolt; 0; L_FiPipe - 0.05*(T_FiCap + T_FiFlange)] + FiPipe_Origin, R_Bolt, L_FiBolt, [0; 90]*deg)
ArrayFiBolt := ArrayLastPolar([FiPipe_Origin[0]; FiPipe_Origin[1]], N_Bolts, AN_BoltArray)
FiCapBoltFrz := FreezeLayer("FiCapBolt")
FiBolts := stack(FiCapBoltLyr, FiCapBolt, ArrayFiBolt, view("f"), array_all(2, 1, -(L_FiPipe + 2*T_FiFlange)), view("t"), FiCapBoltFrz)
FiThreadedRodsLyr := layer_new("FiThreadedRods", grey)
FiThreadedRod := CylinderF([0; -(0.5*outerdiameter(ND_FiPipe) + 2*R_Bolt); -1.05*(T_FiCap + T_FiFlange)] + FiPipe_Origin, R_Bolt, L_FiPipe + 2.1*(T_FiCap + T_FiFlange), [0; 90; 0]*deg)
ArrayFiThreadedRod := ArrayLastPolar([FiPipe_Origin[0]; FiPipe_Origin[1]], N_ThreadedRods, AN_BoltArray)
FiThreadedRodFrz := FreezeLayer("FiThreadedRods")
FiThreadedRods := stack(FiThreadedRodsLyr, FiThreadedRod, ArrayFiThreadedRod, FiThreadedRodFrz)
FiCapFittingsLyr := layer_new("FiCapAccess", green)
FiCapBulkhead := InsertDwg(BulkheadDwg, [FiCapBulkhead_Origin[0]; FiCapBulkhead_Origin[2]; (-FiCapBulkhead_Origin)[1]], ND_FiCapValve, 90 deg)
FiCapValve := InsertDwg(BallValveDwg, [FiCapValve_Origin[0]; FiCapValve_Origin[2]; (-FiCapValve_Origin)[1]], ND_FiCapValve, 270 deg)
FiCapFittingsFrz := FreezeLayer("FiCapAccess")
FiCapAccess := stack(FiCapFittingsLyr, view("f"), FiCapBulkhead, FiCapValve, view("t"), FiCapFittingsFrz)
FiCapsScript := stack(AluminumFlange, FiCaps, FiBolts, FiCapAccess)
# Sand Drain
ND_FiSandDrain := 1 in
L_FiSandBulkheadOffset := 0.5*innerdiameter(ND_FiPipe, PS_Fi) - BulkheadSocketOuterD(ND_FiSandDrain)*0.5/tan(asin(BulkheadSocketOuterD(ND_FiSandDrain)/innerdiameter(ND_FiPipe, PS_Fi))) = 0.000303193 m
FiSandDrainPipeInt_Origin := [
    FiPipe_Origin[0];
    -0.5*innerdiameter(ND_FiPipe, PS_Fi) + FiPipe_Origin[1] + BulkheadSocketDepth(ND_FiSandDrain) + SocketDepth(ND_FiSandDrain) + ElbowRadius(ND_FiSandDrain);
    FiManBulkhead_Origin[2] + outerradius(ND_FiManBranch)
]
L_FiSandDrainPipeInt := T_FiLayer - ElbowRadius(ND_FiSandDrain) - 2.1*ConRadius(ND_FiManTrunk)
FiSandDrainElbowInt_Origin := [0; 0; L_FiSandDrainPipeInt] + FiSandDrainPipeInt_Origin
FiSandDrainPipeH_Origin := [0; -ElbowRadius(ND_FiSandDrain); ElbowRadius(ND_FiSandDrain)] + FiSandDrainElbowInt_Origin
L_FiSandDrainPipeH := BulkheadSocketDepth(ND_FiSandDrain) + SocketDepth(ND_FiSandDrain)
FiSandDrainBulkhead_Origin := [0; -L_FiSandDrainPipeH; 0] + FiSandDrainPipeH_Origin
FiSandDrainFemaleAdapter_Origin := FiSandDrainBulkhead_Origin + [0; -BulkheadThreadLength(ND_FiSandDrain); 0]
FiSandDrainElbowExt_Origin := FiSandDrainFemaleAdapter_Origin + [0; -CouplingLength(ND_FiSandDrain); 0]
FiSandDrainValve_Origin := [
    FiSandDrainElbowExt_Origin[0];
    FiSandDrainElbowExt_Origin[1] - ElbowRadius(ND_FiSandDrain);
    -SocketDepth(ND_FiSandDrain) - BallValveSocket(ND_FiSandDrain) + FiSandDrainElbowExt_Origin[2] - ElbowRadius(ND_FiSandDrain)
]
FiSandDrainPipeVExt_Origin := FiSandDrainValve_Origin + [0; 0; -BallValveLength(ND_FiSandDrain) + 2*BallValveSocket(ND_FiSandDrain)]
L_SandSettle := 10 cm
FiSandDrainPluLyr := layer_new("FiSandDrainPlu", blue)
FiSandDrainIntV := PipeF(FiSandDrainPipeInt_Origin, L_FiSandDrainPipeInt, [0; 90; 0]*deg, ND_FiSandDrain, PS_Fi)
FiSandDrainPipeH := PipeF(FiSandDrainPipeH_Origin, L_FiSandDrainPipeH, [90; 0]*deg, ND_FiSandDrain, PS_Fi)
FiSandDrainPipeExt := PipeF(FiSandDrainPipeVExt_Origin, L_SandSettle + BallValveSocket(ND_FiSandDrain), [0; 270; 0]*deg, ND_FiSandDrain, PS_Fi)
FiSandDrainPluFrz := FreezeLayer("FiSandDrainPlu")
FiSandDrainPlu := stack(FiSandDrainPluLyr, FiSandDrainIntV, FiSandDrainPipeH, FiSandDrainPipeExt, FiSandDrainPluFrz)
FiSandDrainFitLyr := layer_new("FiSandDrainFittings", green)
FiSandDrainBulkhead := InsertDwg(BulkheadDwg, FiSandDrainBulkhead_Origin, ND_FiSandDrain, 270 deg)
FiSandDrainFemaleAdapter := CouplingF(FiSandDrainFemaleAdapter_Origin, [90; 0]*deg, ND_FiSandDrain, PS_Fi)
FiSandDrainElbowInt := ElbowF(FiSandDrainElbowInt_Origin, [90; 90; 0]*deg, ND_FiSandDrain, PS_Fi)
FiSandDrainElbowExt := ElbowF(FiSandDrainElbowExt_Origin, [180; 90; 0]*deg, ND_FiSandDrain, PS_Fi)
FiSandDrainValve := InsertDwg(BallValveDwg, [FiSandDrainValve_Origin[0]; FiSandDrainValve_Origin[2]; -FiSandDrainValve_Origin[1]], ND_FiSandDrain, 90 deg)
FiSandDrainFitFrz := FreezeLayer("FiSandDrainFittings")
FiSandDrainFit := stack(FiSandDrainFitLyr, view("f"), FiSandDrainValve, view("t"), FiSandDrainBulkhead, FiSandDrainFemaleAdapter, FiSandDrainElbowInt, FiSandDrainElbowExt, FiSandDrainFitFrz)
FiSandDrainScript := stack(FiSandDrainPlu, FiSandDrainFit)
# Backwash Piping
ND_FiAirValve := 1 in
L_FiBwExtend := L_FiBwVertCenterLine - ShortTeeLength(ND_FiBwDrain) - innerdiameter(ND_FiPipe, PS_Fi)/2 + L_FiBwBulkheadOffset - BulkheadThreadLength(ND_FiBwDrain) + 2*SocketDepth(ND_FiBwDrain) - CouplingLength(ND_FiBwDrain)
FiBwBulkhead_Origin := [
    innerdiameter(ND_FiPipe, PS_Fi)/2 - L_FiBwBulkheadOffset;
    0;
    L_FiPipe - T_Flange - 1.25*ConRadius(ND_FiBwDrain)
] + FiPipe_Origin = [-1.96956; 2.66147; 5.51412] m
FiBwFemaleAdapter_Origin := FiBwBulkhead_Origin + [BulkheadThreadLength(ND_FiBwDrain); 0; 0]
FiBwTee_Origin := FiBwFemaleAdapter_Origin + [2*SocketDepth(ND_FiBwDrain) + L_FiBwExtend - CouplingLength(ND_FiBwDrain); 0; 0]
L_FiBwPipeVert := L_FiPipe - 1.25*ConRadius(ND_FiBwDrain) + ShortTeeLength(ND_FiDrainValve) + 2*SocketDepth(ND_FiDrainValve)
FiBwReducer_Origin := FiBwTee_Origin + [ShortTeeLength(ND_FiBwDrain); 0; ShortTeeLength(ND_FiBwDrain) + 2*SocketDepth(ND_FiBwDrain)]
FiBwAirValve_Origin := FiBwReducer_Origin + [0; 0; SocketDepth(ND_FiBwDrain) + SocketDepth(ND_FiAirValve)]
FiBwVertValve_Origin := FiBwTee_Origin + [ShortTeeLength(ND_FiBwDrain); 0; -L_FiBwPipeVert - ShortTeeLength(ND_FiBwDrain)]
FiBwDrainLyr := layer_new("FiBwDrainPlu", blue3)
FiBwMan := PipeF(FiBwBulkhead_Origin, L_FiBwMan, [0; 0]*deg, ND_FiBwDrain, PS_Fi)
FiBwDrainFrz := FreezeLayer("FiBwDrainPlu")
FiBwManOrifice := CylinderF(FiBwBulkhead_Origin - [L_FiBwOrificeOffsetR; 0; 0], D_FiBwOrifices/2, 1.1*ConRadius(ND_FiBwDrain), [0; 270]*deg)
ArrayFiBwManOrifices := ArrayLast(1, N_FiBwOrifices, -B_FiBwOrifices)
GroupDelete
D_FiBwOrifices = 1.85622 cm
SubtractFiBwManOrifices := SubtractF(["FiBwDrainPlu"], "DeleteMe")
B_FiBwOrifices = 3.42703 cm
ND_FiAirValve = 1 in
SelectBwDrain := SelectLayer("FiBwDrainPlu")
FiBwNipple := PipeF(FiBwTee_Origin, 2*SocketDepth(ND_FiBwDrain) + L_FiBwExtend, [0; 0]*deg, ND_FiBwDrain, PS_Fi)
FiBwPipeVert1 := PipeF(FiBwTee_Origin + [ShortTeeLength(ND_FiBwDrain); 0; -ShortTeeLength(ND_FiBwDrain)], L_FiBwPipeVert, [0; 270]*deg, ND_FiBwDrain, PS_Fi)
FiBwDrainPlu := stack(FiBwDrainLyr, FiBwMan, FiBwDrainFrz, FiBwManOrifice, ArrayFiBwManOrifices, GroupDelete, SubtractFiBwManOrifices, SelectBwDrain, FiBwNipple, FiBwPipeVert1, FiBwDrainFrz)
FiBwDrainFittingsLyr := layer_new("FiBwDrainFittingsPlu", green)
FiBwManBulkhead := InsertDwg(BulkheadDwg, FiBwBulkhead_Origin, ND_FiBwDrain, 0 deg)
FiBwFemaleAdapter := CouplingF(FiBwFemaleAdapter_Origin, [0; 0; 90]*deg, ND_FiBwDrain, PS_Fi)
FiBwTee := TeeF(FiBwTee_Origin, [90; 0; 90]*deg, ND_FiBwDrain, PS_Fi)
FiOutletReducer := reducerF(FiBwReducer_Origin, [0; 90; 0]*deg, ND_FiBwDrain, ND_FiAirValve, SocketDepth(ND_FiManTrunk), PS_Fi)
FiBwAirValve := InsertDwg(BallValveDwg, [FiBwAirValve_Origin[1]; FiBwAirValve_Origin[2]; FiBwAirValve_Origin[0]], ND_FiAirValve, 270 deg)
FiBwVertValve := InsertDwg(BallValveDwg, [FiBwVertValve_Origin[1]; FiBwVertValve_Origin[2]; FiBwVertValve_Origin[0]], ND_FiBwDrain, 90 deg)
FiBwManCap := CapF(FiBwBulkhead_Origin - [L_FiBwMan; 0; 0], [180; 0]*deg, ND_FiBwDrain)
SubtractFiBwManCapOrifices := SubtractF(["FiBwDrainFittingsPlu"], "DeleteMe")
SelectFiBwDrainFittings := SelectLayer("FiBwDrainFittingsPlu")
FiBwDrainFittingsFrz := FreezeLayer("FiBwDrainFittingsPlu")
FiBwDrainFittings := stack(FiBwDrainFittingsLyr, FiOutletReducer, FiBwManCap, FiBwDrainFittingsFrz, FiBwManOrifice, ArrayFiBwManOrifices, GroupDelete, SubtractFiBwManCapOrifices, SelectFiBwDrainFittings, FiBwManBulkhead, FiBwFemaleAdapter, FiBwTee, view("r"), FiBwAirValve, FiBwVertValve, view("t"), FiBwDrainFittingsFrz)
Y_FiBwDrainPipeOffset := (FiBwTee_Origin[0] + ShortTeeLength(ND_RMPipe) - FiPipe_Origin[0])*1/sqrt(3)
X_FiBwDrainPipeOffset := (FiBwTee_Origin[0] + ShortTeeLength(ND_RMPipe) - FiPipe_Origin[0])*(1 - sqrt(3)/2)  # these only work for 30 deg angles!!!!
FiBwPlu := stack(FiBwDrainFittings, FiBwDrainPlu, ThawMultiple(["*bw*"]), Rotate_All([FiPipe_Origin[0]; FiPipe_Origin[1]], AN_Bw), FreezeMultiple(["*bw*"]))
# Inlet Plumbing
AN_FiDrain := 70 deg + 270 deg
FiInletBallValveBottom_Origin := [
    FiManBulkhead_Origin[0] - BulkheadThreadLength(ND_FiInlet) + BallValveSocket(ND_FiInlet) - L_FiManBulkheadOffset;
    FiManBulkhead_Origin[1];
    FiManBulkhead_Origin[2]
] = [-2.33884; 2.66147; 3.5775] m
FullReducerLength := 2*SocketDepth(ND_FiManTrunk) + SocketDepth(ND_FiInlet)  # right now the reducer uses length as an input
FiInletReducerBottom_Origin := [
    BallValveSocket(ND_FiManTrunk) - BallValveLength(ND_FiManTrunk) - FullReducerLength + SocketDepth(ND_FiInlet);
    0;
    0
] + FiInletBallValveBottom_Origin = [-2.48349; 2.66147; 3.5775] m
FiInletTeeBottom_Origin := [-2*SocketDepth(ND_FiInlet) - ElbowRadius(ND_FiInlet) + ShortTeeLength(ND_FiInlet); 0; 0] + FiInletReducerBottom_Origin
FiInletElbowUpper_Origin := FiInletTeeBottom_Origin + [-ShortTeeLength(ND_FiInlet); 0; 6*T_FiLayer - ElbowRadius(ND_FiInlet)]
FiInletElbowDrop_Origin := FiInletTeeBottom_Origin + [-ShortTeeLength(ND_FiInlet); 0; -ShortTeeLength(ND_FiInlet) - 2*SocketDepth(ND_FiInlet)]
FiInletElbowUp_Origin := FiInletElbowDrop_Origin + [-(ElbowRadius(ND_FiInlet) + 2*SocketDepth(ND_FiInlet)); 0; -ElbowRadius(ND_FiInlet)]
FiDrainTee_Origin := FiInletElbowUp_Origin + [
    -ElbowRadius(ND_FiInlet) + ShortTeeLength(ND_FiInlet)*cos(AN_FiDrain);
    ShortTeeLength(ND_FiInlet)*sin(AN_FiDrain);
    2*SocketDepth(ND_FiInlet) + ElbowRadius(ND_FiInlet) + ShortTeeLength(ND_FiInlet)
]
FiDrainReducer_Origin := FiDrainTee_Origin + [2*SocketDepth(ND_FiInlet)*cos(AN_FiDrain); 2*SocketDepth(ND_FiInlet)*sin(AN_FiDrain); 0]
FiDrainValve_Origin := FiDrainReducer_Origin + [
    (2*SocketDepth(ND_FiDrainValve) + BallValveLength(ND_FiDrainValve) - BallValveSocket(ND_FiDrainValve))*cos(AN_FiDrain);
    (2*SocketDepth(ND_FiDrainValve) + BallValveLength(ND_FiDrainValve) - BallValveSocket(ND_FiDrainValve))*sin(AN_FiDrain);
    0
]
FiDrainElbow_Origin := FiDrainValve_Origin + [
    (BallValveSocket(ND_FiDrainValve) + SocketDepth(ND_FiDrainValve) + ElbowRadius(ND_FiDrainValve))*cos(AN_FiDrain);
    (BallValveSocket(ND_FiDrainValve) + SocketDepth(ND_FiDrainValve) + ElbowRadius(ND_FiDrainValve))*sin(AN_FiDrain);
    -ElbowRadius(ND_FiDrainValve)
]
FiInletManifoldFittingsLyr := layer_new("FiInletManFittingsPlu", green)
FiInletReducer := reducerF(FiInletReducerBottom_Origin, [180; 0; 0]*deg, ND_FiInlet, ND_FiManTrunk, SocketDepth(ND_FiManTrunk), PS_Fi)
FiInletBallValve := InsertDwg(BallValveDwg, FiInletBallValveBottom_Origin, ND_FiManTrunk, 0 deg)
FiInletBottomTee := TeeF(FiInletTeeBottom_Origin, [270; 0; 90]*deg, ND_FiInlet, PS_Fi)
ArrayFiInFittings := array_all(4, 1, 2*T_FiLayer)
ArrayFiInTees := ArrayLast(3, 1, 2*T_FiLayer)
FiOutElbowDrop := ElbowF(FiInletElbowDrop_Origin, [0; 0; 270]*deg, ND_FiInlet, PS_Fi)
FiInletElbowUp := ElbowF(FiInletElbowUp_Origin, [90; 0; 270]*deg, ND_FiInlet, PS_Fi)
FiInletElbowUpper := ElbowF(FiInletElbowUpper_Origin, [180; 0; 270]*deg, ND_FiInlet, PS_Fi)
FiDrainTee := stack(view("f"), TeeF([FiDrainTee_Origin[0]; FiDrainTee_Origin[2]; -FiDrainTee_Origin[1]], [270 deg; AN_FiDrain; 0], ND_FiInlet, PS_Fi), view("t"))
FiDrainReducer := reducerF(FiDrainReducer_Origin, [180 deg + AN_FiDrain; 0; 0], ND_FiInlet, ND_FiDrainValve, SocketDepth(ND_FiDrainValve), PS_Fi)
FiDrainValve := InsertDwg(BallValveDwg, FiDrainValve_Origin, ND_FiDrainValve, AN_FiDrain)
FiDrainElbow := stack(view("f"), ElbowF([FiDrainElbow_Origin[0]; FiDrainElbow_Origin[2]; -FiDrainElbow_Origin[1]], [0; AN_FiDrain; 0], ND_FiDrainValve, PS_Fi), view("t"))
FiInletManifoldFittingsFrz := FreezeLayer("FiInletManFittingsPlu")
FiInletFittings := stack(FiInletManifoldFittingsLyr, FiInletReducer, FiInletBallValve, view("f"), ArrayFiInFittings, view("t"), FiInletBottomTee, view("f"), ArrayFiInTees, view("t"), FiInletElbowUpper, FiOutElbowDrop, FiInletElbowUp, FiDrainTee, FiDrainValve, FiDrainReducer, FiDrainElbow, FiInletManifoldFittingsFrz)
FiInletPipesLyr := layer_new("FiInletManPlu", blue)
FiInletPipesFrz := FreezeLayer("FiInletManPlu")
L_FiDistPipesUnder := FlowDistributionTank_Origin[2] - CouplingLength(ND_FiInlet) + SocketDepth(ND_FiInlet) - ShortTeeLength(ND_FiInlet) - FiDrainTee_Origin[2]
FiDistUnderInletNorth := PipeF([
    FiInletElbowUp_Origin[0] - ElbowRadius(ND_FiInlet);
    FiInletElbowUp_Origin[1];
    FiDrainTee_Origin[2] + ShortTeeLength(ND_FiInlet)
], L_FiDistPipesUnder, [0; 90]*deg, ND_FiInlet, PS_Fi)
L_BottomPipeV := 2*T_FiLayer - TeeLength(ND_FiInlet) = 0.31135 m
FiInletManBottomPipeV := PipeF(FiInletTeeBottom_Origin + [-ShortTeeLength(ND_FiInlet); 0; ShortTeeLength(ND_FiInlet)], L_BottomPipeV, [0; 90]*deg, ND_FiInlet, PS_Fi)
# LH = left horiz
FiInletManUpperPipeV := PipeF(FiInletElbowUpper_Origin, L_BottomPipeV + ShortTeeLength(ND_FiInlet) - ElbowRadius(ND_FiInlet), [0; 270]*deg, ND_FiInlet, PS_Fi)
L_InletPipeBottomLH := 2*SocketDepth(ND_FiInlet) = 0.092 m
FiInletPipeBottomLH := PipeF(FiInletReducerBottom_Origin, L_InletPipeBottomLH, [0; 0]*deg, ND_FiInlet, PS_Fi)
ArrayFiInletPipeV := ArrayLast(2, 1, 2*T_FiLayer)
ArrayFiInletPipesH := array_all(4, 1, 2*T_FiLayer)
FiInletPipes := stack(FiInletPipesLyr, FiInletPipeBottomLH, view("f"), ArrayFiInletPipesH, view("t"), FiInletManBottomPipeV, view("f"), ArrayFiInletPipeV, view("t"), FiDistUnderInletNorth, FiInletManUpperPipeV, FiInletPipesFrz, ThawMultiple(["FiInletMan*"]), Rotate_All([FiPipe_Origin[0]; FiPipe_Origin[1]], AN_FiIn), FreezeMultiple(["FiInletMan*"]))
FiInletPlu := stack(FiInletFittings, FiInletPipes)
L_InletShortPiece := max(0, CouplingLength(ND_FiInlet) - T_Et) + 2*SocketDepth(ND_FiInlet)
# Outlet Plumbing
ND_FiSamplerValve := 1 in
FiCheckValve_Origin := [
    (BulkheadThreadLength(ND_FiManTrunk) + ChkValveLength(ND_FiManTrunk) - 2*ChkValveSocket(ND_FiManTrunk)) + 2*FiPipe_Origin[0] - FiManBulkhead_Origin[0];
    FiManBulkhead_Origin[1];
    FiManBulkhead_Origin[2] + T_FiLayer
]
FiOutletAdapter_Origin := FiCheckValve_Origin + [MaleAdapterLength(ND_FiManTrunk) - SocketDepth(ND_FiManTrunk); 0; 0] = [-1.8157; 2.66147; 3.7775] m
FiOutletManElbow_Origin := [
    FiPipe_Origin[0] + L_FiPipeToOutletVertCenterLine - ElbowRadius(ND_FiInlet);
    FiOutletAdapter_Origin[1];
    FiOutletAdapter_Origin[2]
]
FiOutletReducer_Origin := FiOutletManElbow_Origin + [-(2*SocketDepth(ND_FiInlet)); 0; 0] = [-1.41676; 2.66147; 3.7775] m
FiOutletManTeeBottom_Origin := [-ShortTeeLength(ND_FiInlet) + ElbowRadius(ND_FiInlet); 0; 2*T_FiLayer] + FiOutletManElbow_Origin
L_FiSamplerReducer := SocketDepth(ND_FiInlet) + 2*SocketDepth(ND_FiSamplerValve)
FiOutletSamplerReducer_Origin := FiOutletManTeeBottom_Origin + [ShortTeeLength(ND_FiInlet); 0; -(ShortTeeLength(ND_FiInlet) + 2*SocketDepth(ND_FiInlet))] = [-1.27809; 2.66147; 4.04118] m
FiOutletSamplerValve_Origin := FiOutletSamplerReducer_Origin + [
    0;
    0;
    -2*SocketDepth(ND_FiSamplerValve) - BallValveLength(ND_FiSamplerValve) + BallValveSocket(ND_FiSamplerValve)
]
FiDischargeElbow1_Origin := [
    ShortTeeLength(ND_FiInlet) + FiOutletManTeeBottom_Origin[0];
    FiOutletManTeeBottom_Origin[1];
    FiOutletManTeeBottom_Origin[2] + 2*SocketDepth(ND_FiInlet) + 2*T_FiLayer + ShortTeeLength(ND_FiInlet)
]
FiDischargeElbow2_Origin := [0; ElbowRadius(ND_FiInlet) + T_TankWall + ConRadius(ND_FiPipe); ElbowRadius(ND_FiInlet)] + FiDischargeElbow1_Origin
FiOutletFittingsLyr := layer_new("FiOutletManFittingsPlu", green)
FiOutletCheckValves := InsertDwg(ChkValveDwg, FiCheckValve_Origin, ND_FiManTrunk, 0 deg)
ArrayFiOutletCheckValves := array_all(3, 1, 2*T_FiLayer)
FiOutletAdapter := MaleAdapterF(FiOutletAdapter_Origin, [0; 0]*deg, ND_FiManTrunk, PS_Fi)
FiOutletReducer := reducerF(FiOutletReducer_Origin, [0; 0; 0]*deg, ND_FiInlet, ND_FiManTrunk, SocketDepth(ND_FiManTrunk), PS_Fi)
FiOutletManElbow := ElbowF(FiOutletManElbow_Origin, [270; 0; 90]*deg, ND_FiInlet, PS_Fi)
FiOutletManTeeBottom := TeeF(FiOutletManTeeBottom_Origin, [90; 0; 90]*deg, ND_FiInlet, PS_Fi)
ArrayFiOutletTee := ArrayLast(2, 1, 2*T_FiLayer)
FiPipe_Origin = [-2.12018; 2.66147; 3.51678] m
FiOutletFittingsFrz := FreezeLayer("FiOutletManFittingsPlu")
FiOutletFittings := stack(FiOutletFittingsLyr, FiOutletReducer, FiOutletCheckValves, FiOutletAdapter, view("f"), ArrayFiOutletCheckValves, view("t"), FiOutletManTeeBottom, view("f"), ArrayFiOutletTee, view("t"), FiOutletManElbow, FiOutletFittingsFrz)
FiOutletPipesLyr := layer_new("FiOutletManPlu", blue)
L_FiOutExtend := FiOutletReducer_Origin[0] - FiOutletAdapter_Origin[0] - SocketDepth(ND_FiInlet)
FiOutletNipple := PipeF([FiOutletAdapter_Origin[0] + L_FiOutExtend; FiOutletAdapter_Origin[1]; FiOutletAdapter_Origin[2]], L_FiOutExtend, [0; 0]*deg, ND_FiManTrunk, PS_Fi)
FiBottomHOutlManPipe := PipeF([
    FiOutletReducer_Origin[0] + 2*SocketDepth(ND_FiInlet);
    FiOutletAdapter_Origin[1];
    FiOutletAdapter_Origin[2]
], 2*SocketDepth(ND_FiInlet), [0; 0]*deg, ND_FiInlet, PS_Fi)
FiMidHOutManPipe := PipeF([
    FiOutletReducer_Origin[0] + (2*SocketDepth(ND_FiInlet) + ElbowRadius(ND_FiInlet) - ShortTeeLength(ND_FiInlet));
    FiOutletAdapter_Origin[1];
    FiOutletAdapter_Origin[2] + 2*T_FiLayer
], 2*SocketDepth(ND_FiInlet) + ElbowRadius(ND_FiInlet) - ShortTeeLength(ND_FiInlet), [0; 0]*deg, ND_FiInlet, PS_Fi)
FiUpperHOutManPipe := PipeF([
    FiOutletReducer_Origin[0] + (2*SocketDepth(ND_FiInlet) + ElbowRadius(ND_FiInlet) - ShortTeeLength(ND_FiInlet));
    FiOutletAdapter_Origin[1];
    FiOutletAdapter_Origin[2] + 4*T_FiLayer
], 2*SocketDepth(ND_FiInlet) + ElbowRadius(ND_FiInlet) - ShortTeeLength(ND_FiInlet), [0; 0]*deg, ND_FiInlet, PS_Fi)
FiMidVOutManPipe := PipeF(FiOutletManTeeBottom_Origin + [ShortTeeLength(ND_FiInlet); 0; ShortTeeLength(ND_FiInlet)], 2*T_FiLayer - TeeLength(ND_FiInlet), [0; 90]*deg, ND_FiInlet, PS_Fi)
FiLowerVOutManPipe := PipeF(FiOutletManElbow_Origin + [ElbowRadius(ND_FiInlet); 0; ElbowRadius(ND_FiInlet)], 2*T_FiLayer - ShortTeeLength(ND_FiInlet) - ElbowRadius(ND_FiInlet), [0; 90]*deg, ND_FiInlet, PS_Fi)
FiOutletPipesFrz := FreezeLayer("FiOutletManPlu")
FiOutletPipes := stack(FiOutletPipesLyr, FiOutletNipple, view("f"), ArrayFiOutletCheckValves, view("t"), FiMidVOutManPipe, FiLowerVOutManPipe, FiBottomHOutlManPipe, FiMidHOutManPipe, FiUpperHOutManPipe, FiOutletPipesFrz, ThawMultiple(["FiOutletMan*"]), Rotate_All([FiPipe_Origin[0]; FiPipe_Origin[1]], AN_FiOut), FreezeMultiple(["FiOutletMan*"]))
FiOutletPlu := stack(FiOutletFittings, FiOutletPipes)
FiInExManPlu := stack(FiInletPlu, FiOutletPlu)
# Array Filter
ThawFi := ThawMultiple(["Fi*"])
FiPipe3_Origin := [
    FiPipe_Origin[0];
    Tank_Origin[1] + ConRadius(ND_FiInlet) + 2*ConRadius(ND_RMPipe) + sin(AN_FiIn)*L_FiPipeToOutletVertCenterLine;
    FiPipe_Origin[2]
]
L_ChannelAvail := FiPipe_Origin[1] - FiPipe3_Origin[1]
B_Fi := (L_ChannelAvail - (CouplingLength(ND_FiSandDrain) + ElbowRadius(ND_FiSandDrain) + ConRadius(ND_FiSandDrain)))/(N_Fi - 1)
ArrayFi := array_all(N_Fi - 1, 1, -B_Fi)
MirrorFi := MirrorGroup([Tank_Origin[0]; FiPipe_Origin[1] - L_ChannelAvail/2], [Tank_Origin[0] - zc; FiPipe_Origin[1] - L_ChannelAvail/2], "Fi*", "n")
FreezeFi := FreezeMultiple(["Fi*"])
FiArray := stack(ThawFi, ArrayFi, MirrorFi, FreezeFi)
FiPipe2_Origin := [0; -B_Fi; 0] + FiPipe_Origin
# Operator Access/Walls
# Chem doser platform
H_ConstantHeadAboveEt := 10 cm
H_ConstantHeadToStockOutlet := 15 cm
H_ChemPlatformLedge := 5 cm = 0.05 m
H_ConstantHeadToStockBottom := H_ConstantHeadToStockOutlet - 10 cm
Z_ChemPlatformTop := FlowMeteringTank_Origin[2] + H_Et + H_ConstantHeadAboveEt + H_ConstantHeadToStockBottom
ChemPlatform_Origin := [Tank_Origin[0]; Tank_Origin[1] + W_Wall - L_ChemPlatform; Z_ChemPlatformTop]
H_ChemPlatform := Z_ChemPlatformTop - Tank_Origin[0] - H_Wall - T_TankWall = 2.77893 m
H_StairSet := H_ChemPlatform/3 = 0.92631 m
W_StairSet := H_StairSet*3/2 = 1.38946 m
# Stairs and associated platforms
W_SingleStairMin := 27 cm
H_SingleStairEst := 27 cm
W_StairPlatformMin := 40 cm
H_StairsTotal := H_ChemPlatform - 2*H_SingleStairEst = 2.23893 m
L_EtStairsAvail := W_Wall - W_Et - T_Et - W_StairPlatformMin - 15 cm = 2.09085 m
L_ChemPlatformStairsAvail := W_Wall - L_ChemPlatform - W_Et - T_Et = 1.29785 m
L_StairsAvailTotal := L_EtStairsAvail + L_ChemPlatformStairsAvail = 3.3887 m
Stair_Ratio := H_StairsTotal/L_StairsAvailTotal = 0.660704
N_Stairs := floor(L_StairsAvailTotal/W_SingleStairMin) = 12
W_SingleStair := L_StairsAvailTotal/N_Stairs = 0.282392 m
H_SingleStair := W_SingleStair*Stair_Ratio = 0.186577 m
H_ChemPlatformStairsTotal := Z_ChemPlatformTop - T_TankWall - H_Wall - T_Platform
H_ChemPlatformStairs := (H_ChemPlatformStairsTotal - 2*H_SingleStair)/3 = 0.751925 m
OpAccessLyr := layer_new("OperatorAccess", grey)
ChemPlatform := BoxF(ChemPlatform_Origin + [0; 0; H_ChemPlatformLedge], [-W_ChemPlatform; L_ChemPlatform; -T_Platform] + ChemPlatform_Origin, [0; 0; 0]*deg)
CHTPillar := BoxF([-W_ChemPlatform; 0; 0] + ChemPlatform_Origin, [
    -W_ChemPlatform + T_Et + ChemPlatform_Origin[0];
    ChemPlatform_Origin[1] + T_Et;
    Tank_Origin[2] + H_Wall
], [0; 0; 0]*deg)
N_StairsToEt := round(L_EtStairsAvail*H_SingleStair/W_SingleStair/H_SingleStair) = 7
H_StairToEt := L_EtStairsAvail*H_SingleStair/W_SingleStair/N_StairsToEt = 0.197348 m
H_EtStairsTot := H_StairToEt*N_StairsToEt = 1.38143 m
N_StairsToChemPlatform := floor((L_ChemPlatformStairsAvail - W_StairPlatformMin + W_SingleStair + 15 cm)/W_SingleStair) = 4
L_StairsToChemPlatformTot := N_StairsToChemPlatform*W_SingleStair = 1.12957 m
L_ChemPlatformStairsAvail = 1.29785 m
W_PlatformUpper := L_ChemPlatformStairsAvail - L_StairsToChemPlatformTot + 15 cm = 0.318283 m
H_StairsToChemPlatformTot := L_StairsToChemPlatformTot*H_SingleStair/W_SingleStair = 0.74631 m
H_ChemPlatformStair := H_StairsToChemPlatformTot/N_StairsToChemPlatform = 0.186577 m
H_StairToChemTanksAvail := H_ChemPlatform - H_EtStairsTot - H_StairToEt = 1.20015 m
H_StairExtra := (H_StairToChemTanksAvail - H_StairsToChemPlatformTot + H_ChemPlatformStair + H_SingleStair)/3 = 0.275664 m
W_StairPlatformMin = 0.4 m
H_StairToEt = 0.197348 m
EtStairsBox := BoxF([Tank_Origin[0]; W_Wall + Tank_Origin[1]; H_Wall + T_TankWall + Tank_Origin[2]], [
    -W_ChemPlatform/2;
    -(L_EtStairsAvail + 15 cm) + W_Wall;
    Tank_Origin[2] + T_TankWall + H_Wall + H_StairExtra
] + Tank_Origin, [0; 0; 0]*deg) = "_box 0,3,3.25 -0.63575,0.75915,3.52566"
H_StairExtra = 0.275664 m
Tank_Origin[2] + T_TankWall + H_Wall + H_StairExtra - 2*H_SingleStair
H_StairExtra - 2*H_SingleStair = -0.0974905 m
EtStairs := Stairs([
    FlowMeteringTank_Origin[0] - W_ChemPlatform/2;
    W_Et + T_Et + W_StairPlatformMin + FlowMeteringTank_Origin[1];
    H_EtStairsTot + Tank_Origin[2] + T_TankWall + H_Wall + H_StairExtra - H_StairToEt
], W_ChemPlatform/2, H_EtStairsTot, 90 deg)
EtPlatform := BoxF([
    FlowMeteringTank_Origin[0];
    W_Et + T_Et + FlowMeteringTank_Origin[1];
    Tank_Origin[2] + H_Wall + T_TankWall
], [
    FlowMeteringTank_Origin[0] - W_ChemPlatform;
    W_Et + T_Et + FlowMeteringTank_Origin[1] + W_StairPlatformMin;
    Tank_Origin[2] + H_Wall + T_TankWall + H_EtStairsTot + 2*H_StairExtra - H_StairToEt
] + Tank_Origin, [0; 0; 0]*deg)
EtPlatformLeft := BoxF([
    FlowMeteringTank_Origin[0] - W_ChemPlatform/2;
    W_Et + T_Et + FlowMeteringTank_Origin[1];
    Tank_Origin[2] + H_Wall + T_TankWall + H_EtStairsTot
], [
    FlowMeteringTank_Origin[0] - W_ChemPlatform;
    ChemPlatform_Origin[1];
    Tank_Origin[2] + H_Wall + T_TankWall + H_EtStairsTot + 3*H_StairExtra - H_StairToEt
] + Tank_Origin, [0; 0; 0]*deg)
UpperPlatform := BoxF([
    FlowMeteringTank_Origin[0] - W_ChemPlatform/2;
    ChemPlatform_Origin[1] - 11.67 cm;
    Z_ChemPlatformTop + H_ChemPlatformLedge
], [
    FlowMeteringTank_Origin[0] - W_ChemPlatform;
    ChemPlatform_Origin[1];
    Z_ChemPlatformTop - H_StairExtra - H_StairsToChemPlatformTot
] + Tank_Origin, [0; 0; 0]*deg)
UpperPlatformExtra := BoxF([
    FlowMeteringTank_Origin[0] - W_ChemPlatform/2;
    ChemPlatform_Origin[1] + 17.33 cm;
    Z_ChemPlatformTop + H_ChemPlatformLedge
], [FlowMeteringTank_Origin[0] - W_ChemPlatform; ChemPlatform_Origin[1]; Z_ChemPlatformTop] + Tank_Origin, [0; 0; 0]*deg)
WestPlatform := BoxF([
    FlowMeteringTank_Origin[0] - L_Et - T_Et;
    FlowMeteringTank_Origin[1] + W_Et;
    Tank_Origin[2] + H_Wall + T_TankWall + H_EtStairsTot + 3*H_StairExtra - H_StairToEt
], [
    FlowMeteringTank_Origin[0] - W_ChemPlatform;
    W_Et + T_Et + FlowMeteringTank_Origin[1];
    Tank_Origin[2] + H_Wall + T_TankWall
] + Tank_Origin, [0; 0; 0]*deg) = "_box -0.82066,0.28415,5.26108 -1.2715,0.35915,3.25"
ChemPlatformStairs := Stairs([
    FlowMeteringTank_Origin[0] - W_ChemPlatform/2;
    W_Et + T_Et + FlowMeteringTank_Origin[1] + W_StairPlatformMin - W_SingleStair + L_StairsToChemPlatformTot;
    H_EtStairsTot + Tank_Origin[2] + T_TankWall + H_Wall + 3*H_StairExtra - H_StairToEt + H_StairsToChemPlatformTot - H_ChemPlatformStair
], W_ChemPlatform/2, H_StairsToChemPlatformTot, -90 deg)
OpAccessFrz := FreezeLayer("OperatorAccess")
ChemPlatformLedgeBox := BoxF(ChemPlatform_Origin + [0; 5 cm; H_ChemPlatformLedge], [-W_ChemPlatform + 5 cm; L_ChemPlatform; 0] + ChemPlatform_Origin, [0; 0; 0]*deg)
SubtractChemPlatformLedge := SubtractF(["OperatorAccess"], "DeleteMe")
OpAccessSelect := SelectLayer("OperatorAccess")
OpAccessScript := stack(OpAccessLyr, ChemPlatform, CHTPillar, EtStairs, EtStairsBox, EtPlatform, EtPlatformLeft, ChemPlatformStairs, UpperPlatform, WestPlatform, Union_All, OpAccessFrz, ChemPlatformLedgeBox, GroupDelete, SubtractChemPlatformLedge, OpAccessSelect, UpperPlatformExtra, OpAccessFrz)
# Backwash Buckets, Drain Channel
R_FitHand := 5 cm
BwBucketsLyr := layer_new("BwBuckets", yellow)
NorthBwBucketOuter := CylinderF([
    -cos(AN_BwMod)*L_FiBwVertCenterLine + FiPipe_Origin[0] - R_FitHand;
    -sin(AN_BwMod)*L_FiBwVertCenterLine + FiPipe_Origin[1];
    Tank_Origin[2] + H_Wall + T_TankWall
], 1.8*ConRadius(ND_FiBwDrain) + R_FitHand, H_BackwashBoxes, [0; 90; 0]*deg)
MirrorBwBucket := MirrorLast([Tank_Origin[0]; FiPipe_Origin[1] - L_ChannelAvail/2], [Tank_Origin[0] - zc; FiPipe_Origin[1] - L_ChannelAvail/2], "n")
MidBwBucketOuter := CylinderF([
    -cos(AN_BwMod)*L_FiBwVertCenterLine + FiPipe_Origin[0] - R_FitHand;
    -sin(AN_BwMod)*L_FiBwVertCenterLine + FiPipe_Origin[1] - B_Fi;
    Tank_Origin[2] + H_Wall + T_TankWall
], 1.8*ConRadius(ND_FiBwDrain) + R_FitHand, H_BackwashBoxes, [0; 90; 0]*deg)
FreezeBwBuckets := FreezeLayer("BwBuckets")
NorthBwBucketInner := CylinderF([
    -cos(AN_BwMod)*L_FiBwVertCenterLine + FiPipe_Origin[0] - R_FitHand;
    -sin(AN_BwMod)*L_FiBwVertCenterLine + FiPipe_Origin[1];
    Tank_Origin[2] + H_Wall + T_TankWall + .08*ConRadius(ND_FiBwDrain)
], 1.72*ConRadius(ND_FiBwDrain) + R_FitHand, H_BackwashBoxes, [0; 90; 0]*deg)
MidBwBucketInner := CylinderF([
    -cos(AN_BwMod)*L_FiBwVertCenterLine + FiPipe_Origin[0] - R_FitHand;
    -sin(AN_BwMod)*L_FiBwVertCenterLine + FiPipe_Origin[1];
    Tank_Origin[2] + H_Wall + T_TankWall + .08*ConRadius(ND_FiBwDrain)
], 1.72*ConRadius(ND_FiBwDrain) + R_FitHand, H_BackwashBoxes, [0; 90; 0]*deg)
SubtractBwBuckets := SubtractF(["BwBuckets"], "DeleteMe")
DrainChannelLyr := layer_new("DrainChannel", grey)
DCBox := BoxF([
    -cos(AN_BwMod)*L_FiBwVertCenterLine + ConRadius(ND_FiBwDrain) + FiPipe_Origin[0] + 2*S_Fitting;
    FlowDistributionTank_Origin[1];
    Tank_Origin[2] + H_Wall + T_TankWall
], [
    -cos(AN_BwMod)*L_FiBwVertCenterLine + ConRadius(ND_FiBwDrain) + FiPipe_Origin[0] + T_Et + 2*S_Fitting;
    FlowDistributionTank_Origin[1] + W_Wall;
    Tank_Origin[2] + H_Wall + T_TankWall + H_DrainChannel
], [0; 0; 0]*deg)
DrainChannelFrz := FreezeLayer("DrainChannel")
DrainChannel := stack(BwBucketsLyr, NorthBwBucketOuter, MirrorBwBucket, MidBwBucketOuter, FreezeBwBuckets, NorthBwBucketInner, MirrorBwBucket, MidBwBucketInner, GroupDelete, SubtractBwBuckets, DrainChannelLyr, DCBox, DrainChannelFrz)
# Chem Tanks
CoagTank_Origin := [
    -max(R_CoagTank, R_ChlorineTank) + ChemPlatform_Origin[0] - S_Fitting/2;
    -(S_Fitting/2 + R_CoagTank) + ChemPlatform_Origin[1] + W_ChemPlatform;
    ChemPlatform_Origin[2]
]
ChemTankLyr := layer_new("ChemicalTanks", yellow)
CoagTank := CylinderF(CoagTank_Origin, R_CoagTank + T_ChemTankWall, H_CoagTank + T_ChemTankWall, [0; 90]*deg)
ChemTankFrz := FreezeLayer("ChemicalTanks")
CoagTankInner := CylinderF(CoagTank_Origin + [0; 0; T_ChemTankWall], R_CoagTank, H_CoagTank, [0; 90]*deg)
HollowTanks := SubtractF(["ChemicalTanks"], "DeleteMe")
ChemTanksScript := stack(ChemTankLyr, CoagTank, ChemTankFrz, CoagTankInner, GroupDelete, HollowTanks, ThawMultiple(["ChemicalTanks"]), Array_All(1, 2, -(2*R_CoagTank + S_Fitting/2)), FreezeLayer("ChemicalTanks"))
# Slotted Pipe Molded
SlottedPipe_Origin := [0; 0; 0]*m
OuterMold_Origin := [outerdiameter(ND_FiManTrunk)/2 - L_BranchExtend; -(1.1*ConRadius(ND_FiManBranch)); 0] + SlottedPipe_Origin
FiSlottedSampleLyr := layer_new("FiSlottedSample", blue)
SlottedPipe := PipeF([0; 0; 0]*m, L_FiManBranch[0], [0; 0]*deg, ND_FiManBranch, PS_Fi)
FiSlottedSampleFrz := FreezeLayer("FiSlottedSample")
PipeMoldOuter := CylinderF(OuterMold_Origin, outerdiameter(ND_FiManTrunk)/2, 2.2*ConRadius(ND_FiManBranch), [270; 0]*deg)
PipeSubtraction := CylinderF(SlottedPipe_Origin, D_BranchSlotOrifice/2, outerdiameter(ND_FiManTrunk), [0; 0]*deg)
SubtractMold := SubtractAll(OuterMold_Origin)
SquishPipe := SubtractF(["FiSlottedSample"], "DeleteMe")
L_SlotFromCenter := sqrt((innerdiameter(ND_FiManBranch, PS_Fi)/2)^2 - (L_slots/2)^2)
L_FiBranchAvail := L_FiManBranch[0] - 0.75*CapHeight(ND_FiManBranch) - L_BranchExtend = 0.0214238 m
B_Slots := (L_FiBranchAvail - W_slots)/(0.5*N_slots*L_FiBranchAvail - 1) = 0.0036926 m
N_FiSlotsOneSide := Ceil(L_FiBranchAvail*N_slots*0.5, 1) = 7
SlotBox := BoxF([
    -L_BranchExtend - 0.25*CapHeight(ND_FiManBranch) - W_slots;
    L_SlotFromCenter;
    outerdiameter(ND_FiManBranch)
] + SlottedPipe_Origin, [
    -L_BranchExtend - 0.25*CapHeight(ND_FiManBranch);
    outerdiameter(ND_FiManBranch);
    -outerdiameter(ND_FiManBranch)
] + SlottedPipe_Origin, [0; 0; 0]*deg)
MirrorSlot := MirrorLast([SlottedPipe_Origin[0]; SlottedPipe_Origin[1]], [SlottedPipe_Origin[0] - zc; SlottedPipe_Origin[1]], "n")
ArraySlots := Array_All(1, N_FiSlotsOneSide, -B_Slots)
SubtractSlots := SubtractF(["FiSlottedSample"], "DeleteMe")
SlottedSampleCapLyr := layer_new("FiSlottedCapSample", red)
SampleCap := CutCapF(SlottedPipe_Origin - [L_FiManBranch[0]; 0; 0], CapHeight(ND_FiManBranch)/2, [180; 0]*deg, ND_FiManBranch)
SlottedSampleCapFrz := FreezeLayer("FiSlottedCapSample")
FiSlottedSample := stack(FiSlottedSampleLyr, SlottedPipe, FiSlottedSampleFrz, PipeMoldOuter, GroupDelete, PipeSubtraction, SubtractMold, SquishPipe, SlotBox, MirrorSlot, ArraySlots, GroupDelete, SubtractSlots, SlottedSampleCapLyr, SampleCap, SlottedSampleCapFrz)
# Filtered Water Plumbing
# L means the lower line for waste
# U means the upper line for storage
CleanWaterElbowFromFiSouth_Origin := [
    -(cos(AN_FiIn)*L_FiPipeToOutletVertCenterLine) + FiPipe_Origin[0];
    Tank_Origin[1] + 2*ConRadius(ND_RMPipe) + ConRadius(ND_FiInlet);
    FiOutletManElbow_Origin[2] + 4*T_FiLayer + 2*SocketDepth(ND_FiInlet) + ShortTeeLength(ND_FiInlet)
]
CleanWaterTeeToStorageU_Origin := [
    CleanWaterElbowFromFiSouth_Origin[0];
    FiPipe3_Origin[1] + (FiPipe2_Origin[1] - FiPipe3_Origin[1])*0.5;
    CleanWaterElbowFromFiSouth_Origin[2] + ElbowRadius(ND_FiInlet) - ShortTeeLength(ND_FiInlet)
]
CleanWaterElbowToStorageL_Origin := [
    CleanWaterTeeToStorageU_Origin[0];
    CleanWaterTeeToStorageU_Origin[1] + ElbowRadius(ND_FiInlet);
    FiPipe_Origin[2]
]
CleanWaterTeeToWasteSouth_Origin := CleanWaterTeeToStorageU_Origin + [0; -(TeeLength(ND_FiInlet) + 2*SocketDepth(ND_FiInlet) + BallValveLength(ND_FiInlet)); 0]
CleanWaterReducerToWasteSouth_Origin := CleanWaterTeeToWasteSouth_Origin + [0; 0; -2*SocketDepth(ND_FiInlet)]
WasteValveSouth_Origin := CleanWaterReducerToWasteSouth_Origin + [0; 0; -2*SocketDepth(ND_CleanWaterOutlet) - BallValveSocket(ND_CleanWaterOutlet)]
CleanWaterValveSouth_Origin := CleanWaterTeeToWasteSouth_Origin + [
    0;
    ShortTeeLength(ND_FiInlet) + SocketDepth(ND_FiInlet) + BallValveLength(ND_FiInlet) - BallValveSocket(ND_FiInlet);
    ShortTeeLength(ND_FiInlet)
]
CleanWaterValveMid_Origin := CleanWaterTeeToStorageU_Origin + [
    0;
    ShortTeeLength(ND_FiInlet) + SocketDepth(ND_FiInlet) + BallValveLength(ND_FiInlet) - BallValveSocket(ND_FiInlet);
    ShortTeeLength(ND_FiInlet)
]
CleanWaterTeeToWasteMid_Origin := CleanWaterTeeToStorageU_Origin + [0; TeeLength(ND_FiInlet) + 2*SocketDepth(ND_FiInlet) + BallValveLength(ND_FiInlet); 0]
CleanWaterReducerToWasteMid_Origin := CleanWaterTeeToWasteMid_Origin + [0; 0; -2*SocketDepth(ND_FiInlet)]
WasteValveMid_Origin := CleanWaterReducerToWasteMid_Origin + [0; 0; -2*SocketDepth(ND_CleanWaterOutlet) - BallValveSocket(ND_CleanWaterOutlet)]
CleanWaterElbowFromFiNorth_Origin := [
    -(cos(AN_FiIn)*L_FiPipeToOutletVertCenterLine) + FiPipe_Origin[0];
    sin(AN_FiIn)*L_FiPipeToOutletVertCenterLine + FiPipe_Origin[1];
    CleanWaterElbowFromFiSouth_Origin[2]
]
CleanWaterElbowFromFiMid_Origin := CleanWaterElbowFromFiNorth_Origin + [0; -B_Fi; 0]
CleanWaterElbowToStorageU_Origin := [0; 2*ConRadius(ND_FiInlet) + S_Fitting; 0] + CleanWaterElbowFromFiMid_Origin
CleanWaterTeeToWasteNorth_Origin := CleanWaterElbowToStorageU_Origin + [
    0;
    2*SocketDepth(ND_FiInlet) + BallValveLength(ND_FiInlet) + ShortTeeLength(ND_FiInlet) + ElbowRadius(ND_FiInlet);
    -ShortTeeLength(ND_FiInlet) + ElbowRadius(ND_FiInlet)
]
CleanWaterReducerToWasteNorth_Origin := CleanWaterTeeToWasteNorth_Origin + [0; 0; -2*SocketDepth(ND_FiInlet)]
WasteValveNorth_Origin := CleanWaterReducerToWasteNorth_Origin + [0; 0; -2*SocketDepth(ND_CleanWaterOutlet) - BallValveSocket(ND_CleanWaterOutlet)]
CleanWaterValveNorth_Origin := CleanWaterElbowToStorageU_Origin + [
    0;
    SocketDepth(ND_FiInlet) + BallValveLength(ND_FiInlet) - BallValveSocket(ND_FiInlet) + ElbowRadius(ND_FiInlet);
    ElbowRadius(ND_FiInlet)
]
CleanWaterTeeToStorageL_Origin := [
    CleanWaterElbowToStorageU_Origin[0];
    CleanWaterElbowToStorageU_Origin[1];
    FiPipe_Origin[2] + ShortTeeLength(ND_FiInlet)
] = [-2.9367; 1.92935; 3.5611] m
CleanWaterElbowToStorageNorth_Origin := [
    CleanWaterElbowFromFiNorth_Origin[0];
    Tank_Origin[1] + W_Wall - ConRadius(ND_FiInlet) - ElbowRadius(ND_FiInlet);
    CleanWaterTeeToStorageL_Origin[2] - ShortTeeLength(ND_FiInlet)
]
FiAuxFittingsLyr := layer_new("AuxFittings", green)
CleanWaterElbowFromFiSouth := ElbowF(CleanWaterElbowFromFiSouth_Origin, [270; 270; 0]*deg, ND_FiInlet, PS_Fi)
CleanWaterTeeToWasteSouth := TeeF(CleanWaterTeeToWasteSouth_Origin, [90; 270; 0]*deg, ND_FiInlet, PS_Fi)
CleanWaterReducerToWasteSouth := reducerF(CleanWaterReducerToWasteSouth_Origin, [0; 270; 0]*deg, ND_FiInlet, ND_CleanWaterOutlet, SocketDepth(ND_CleanWaterOutlet), PS_Fi)
CleanWaterTeeToStorageU := TeeF(CleanWaterTeeToStorageU_Origin, [90; 270; 0]*deg, ND_FiInlet, PS_Fi)
CleanWaterTeeToWasteMid := TeeF(CleanWaterTeeToWasteMid_Origin, [90; 270; 0]*deg, ND_FiInlet, PS_Fi)
CleanWaterReducerToWasteMid := reducerF(CleanWaterReducerToWasteMid_Origin, [0; 270; 0]*deg, ND_FiInlet, ND_CleanWaterOutlet, SocketDepth(ND_CleanWaterOutlet), PS_Fi)
CleanWaterElbowFromFiMid := ElbowF(CleanWaterElbowFromFiMid_Origin, [90; 90; 0]*deg, ND_FiInlet, PS_Fi)
CleanWaterElbowFromFiNorth := ElbowF(CleanWaterElbowFromFiNorth_Origin, [90; 90; 0]*deg, ND_FiInlet, PS_Fi)
CleanWaterTeeToStorageL := TeeF(CleanWaterTeeToStorageL_Origin, [90; 90; 0]*deg, ND_FiInlet, PS_Fi)
CleanWaterElbowToStorageL := ElbowF(CleanWaterElbowToStorageL_Origin, [180; 270; 0]*deg, ND_FiInlet, PS_Fi)
CleanWaterTeeToWasteNorth := TeeF(CleanWaterTeeToWasteNorth_Origin, [90; 270; 0]*deg, ND_FiInlet, PS_Fi)
CleanWaterReducerToWasteNorth := reducerF(CleanWaterReducerToWasteNorth_Origin, [0; 270; 0]*deg, ND_FiInlet, ND_CleanWaterOutlet, SocketDepth(ND_CleanWaterOutlet), PS_Fi)
CleanWaterElbowToStorageU := ElbowF(CleanWaterElbowToStorageU_Origin, [270; 270; 0]*deg, ND_FiInlet, PS_Fi)
CleanWaterValveNorth := InsertDwg(BallValveDwg, [CleanWaterValveNorth_Origin[1]; CleanWaterValveNorth_Origin[2]; CleanWaterValveNorth_Origin[0]], ND_FiInlet, 0 deg)
CleanWaterValveMid := InsertDwg(BallValveDwg, [CleanWaterValveMid_Origin[1]; CleanWaterValveMid_Origin[2]; CleanWaterValveMid_Origin[0]], ND_FiInlet, 0 deg)
CleanWaterValveSouth := InsertDwg(BallValveDwg, [CleanWaterValveSouth_Origin[1]; CleanWaterValveSouth_Origin[2]; CleanWaterValveSouth_Origin[0]], ND_FiInlet, 0 deg)
WasteValveNorth := InsertDwg(BallValveDwg, [WasteValveNorth_Origin[1]; WasteValveNorth_Origin[2]; WasteValveNorth_Origin[0]], ND_CleanWaterOutlet, 90 deg)
WasteValveMid := InsertDwg(BallValveDwg, [WasteValveMid_Origin[1]; WasteValveMid_Origin[2]; WasteValveMid_Origin[0]], ND_CleanWaterOutlet, 90 deg)
WasteValveSouth := InsertDwg(BallValveDwg, [WasteValveSouth_Origin[1]; WasteValveSouth_Origin[2]; WasteValveSouth_Origin[0]], ND_CleanWaterOutlet, 90 deg)
StorageAndWasteValves := stack(view("r"), CleanWaterValveNorth, CleanWaterValveMid, CleanWaterValveSouth, WasteValveNorth, WasteValveMid, WasteValveSouth, view("t"))
FiAuxFittingsFrz := FreezeLayer("AuxFittings")
FiAuxFit := stack(FiAuxFittingsLyr, CleanWaterElbowFromFiSouth, CleanWaterTeeToWasteSouth, CleanWaterReducerToWasteSouth, CleanWaterElbowFromFiMid, CleanWaterElbowFromFiNorth, CleanWaterTeeToStorageL, CleanWaterTeeToWasteMid, CleanWaterReducerToWasteMid, CleanWaterTeeToStorageU, CleanWaterElbowToStorageL, CleanWaterTeeToWasteNorth, CleanWaterReducerToWasteNorth, CleanWaterElbowToStorageU, StorageAndWasteValves, FiAuxFittingsFrz)
FiAuxPipesLyr := layer_new("AuxPipes", blue)
L_SouthCleanWaterPipeU := CleanWaterTeeToWasteSouth_Origin[1] - CleanWaterElbowFromFiSouth_Origin[1] - ShortTeeLength(ND_FiInlet) - ElbowRadius(ND_FiInlet)
L_MidCleanWaterPipeU := CleanWaterElbowFromFiMid_Origin[1] - CleanWaterTeeToWasteMid_Origin[1] - ShortTeeLength(ND_FiInlet) - ElbowRadius(ND_FiInlet)
L_NorthCleanWaterPipeU := CleanWaterElbowFromFiNorth_Origin[1] - CleanWaterTeeToWasteNorth_Origin[1] - ShortTeeLength(ND_FiInlet) - ElbowRadius(ND_FiInlet)
L_SouthPipeToStorage := CleanWaterTeeToStorageU_Origin[2] - CleanWaterElbowToStorageL_Origin[2] - ElbowRadius(ND_FiInlet)
L_NorthPipeToStorage := CleanWaterElbowToStorageU_Origin[2] - CleanWaterElbowToStorageL_Origin[2] - ShortTeeLength(ND_FiInlet)
L_CleanWaterPipeL := CleanWaterElbowToStorageNorth_Origin[1] - ShortTeeLength(ND_FiInlet) - CleanWaterTeeToStorageL_Origin[1]
L_SouthCleanWaterPipeL := CleanWaterTeeToStorageL_Origin[1] - CleanWaterElbowToStorageL_Origin[1] - ShortTeeLength(ND_FiInlet)
L_WastePipeNorth := (WasteValveNorth_Origin[2] - Tank_Origin[2] - H_Wall - T_Floor)*.50
L_WastePipeMid := (WasteValveNorth_Origin[2] - Tank_Origin[2] - H_Wall - T_Floor)*.50
L_WastePipeSouth := (WasteValveNorth_Origin[2] - Tank_Origin[2] - H_Wall - T_Floor)*.50
FiSouthCleanWaterPipeU := PipeF(CleanWaterElbowFromFiSouth_Origin + [0; ElbowRadius(ND_FiInlet); ElbowRadius(ND_FiInlet)], L_SouthCleanWaterPipeU, [270; 0; 0]*deg, ND_FiInlet, PS_Fi)
FiMidCleanWaterPipeU := PipeF(CleanWaterElbowFromFiMid_Origin + [0; -ElbowRadius(ND_FiInlet); ElbowRadius(ND_FiInlet)], L_MidCleanWaterPipeU, [90; 0; 0]*deg, ND_FiInlet, PS_Fi)
FiNorthCleanWaterPipeU := PipeF(CleanWaterElbowFromFiNorth_Origin + [0; -ElbowRadius(ND_FiInlet); ElbowRadius(ND_FiInlet)], L_NorthCleanWaterPipeU, [90; 0; 0]*deg, ND_FiInlet, PS_Fi)
FiSouthCleanWaterPipeL := PipeF(CleanWaterTeeToStorageL_Origin + [0; -ShortTeeLength(ND_FiInlet); -ShortTeeLength(ND_FiInlet)], L_SouthCleanWaterPipeL, [90; 0; 0]*deg, ND_FiInlet, PS_Fi)
FiNorthCleanWaterPipeL := PipeF(CleanWaterElbowToStorageNorth_Origin, L_CleanWaterPipeL, [90; 0; 0]*deg, ND_FiInlet, PS_Fi)
FiNorthWastePipe := PipeF(WasteValveNorth_Origin + [0; 0; -BallValveLength(ND_FiInlet) + 2*SocketDepth(ND_FiInlet)], (WasteValveNorth_Origin[2] - Tank_Origin[2] - H_Wall - T_Floor)*.50, [0; 270; 0]*deg, ND_CleanWaterOutlet, PS_Fi)
FiMidWastePipe := PipeF(WasteValveMid_Origin + [0; 0; -BallValveLength(ND_FiInlet) + 2*SocketDepth(ND_FiInlet)], (WasteValveNorth_Origin[2] - Tank_Origin[2] - H_Wall - T_Floor)*.50, [0; 270; 0]*deg, ND_CleanWaterOutlet, PS_Fi)
FiSouthWastePipe := PipeF(WasteValveSouth_Origin + [0; 0; -BallValveLength(ND_FiInlet) + 2*SocketDepth(ND_FiInlet)], (WasteValveNorth_Origin[2] - Tank_Origin[2] - H_Wall - T_Floor)*.50, [0; 270; 0]*deg, ND_CleanWaterOutlet, PS_Fi)
SouthPipeToStorage := PipeF(CleanWaterTeeToStorageU_Origin, L_SouthPipeToStorage, [0; 270; 0]*deg, ND_FiInlet, PS_Fi)
NorthPipeToStorage := PipeF(CleanWaterElbowToStorageU_Origin, L_NorthPipeToStorage, [0; 270; 0]*deg, ND_FiInlet, PS_Fi)
FiAuxPipesFrz := FreezeLayer("AuxPipes")
FiAuxPipes := stack(FiAuxPipesLyr, FiSouthCleanWaterPipeU, FiMidCleanWaterPipeU, FiNorthCleanWaterPipeU, FiSouthCleanWaterPipeL, FiNorthCleanWaterPipeL, FiNorthWastePipe, FiMidWastePipe, FiSouthWastePipe, SouthPipeToStorage, NorthPipeToStorage, FiAuxPipesFrz)
FiAuxPlumbing := stack(FiAuxFit, FiAuxPipes)
# Plumbing To Storage
CleanWaterElbowToStorageNorthU_Origin := [
    CleanWaterElbowToStorageNorth_Origin[0];
    ElbowRadius(ND_FiInlet) + CleanWaterElbowToStorageNorth_Origin[1];
    CleanWaterElbowToStorageNorth_Origin[2] + ElbowRadius(ND_FiInlet) + H_Bucket5Gal
]
CleanWaterTeeToStorage_Origin := [
    FiPipe_Origin[0] + ConRadius(ND_FiPipe) + ConRadius(ND_FiInlet);
    CleanWaterElbowToStorageNorth_Origin[1] + ElbowRadius(ND_FiInlet);
    CleanWaterElbowToStorageNorthU_Origin[2] + ElbowRadius(ND_FiInlet) - ShortTeeLength(ND_FiInlet)
]
CleanWaterOutletReducer_Origin := CleanWaterTeeToStorage_Origin + [0; 0; -2*SocketDepth(ND_FiInlet)]
CleanWaterCouplingToStorage_Origin := [
    CleanWaterTeeToStorage_Origin[0] + ShortTeeLength(ND_FiInlet) + 2*SocketDepth(ND_FiInlet) + ElbowRadius(ND_FiInlet);
    CleanWaterTeeToStorage_Origin[1];
    Tank_Origin[2] + H_Wall + T_TankWall - SocketDepth(ND_FiInlet)
]
CleanWaterOutletElbow_Origin := [
    CleanWaterCouplingToStorage_Origin[0];
    CleanWaterCouplingToStorage_Origin[1];
    CleanWaterTeeToStorage_Origin[2] + ShortTeeLength(ND_FiInlet) - ElbowRadius(ND_FiInlet)
]
CleanWaterOutletValve_Origin := [
    CleanWaterOutletReducer_Origin[0];
    CleanWaterOutletReducer_Origin[1];
    CleanWaterOutletReducer_Origin[2] - (2*SocketDepth(ND_CleanWaterOutlet) + BallValveSocket(ND_CleanWaterOutlet))
]
FiFitToStorageLyr := layer_new("FiFittingsToStorage", green)
FiCleanWaterElbowNorth := ElbowF(CleanWaterElbowToStorageNorth_Origin, [0; 90; 0]*deg, ND_FiInlet, PS_Fi)
FiCleanWaterElbowNorthU := ElbowF(CleanWaterElbowToStorageNorthU_Origin, [180; 0; 270]*deg, ND_FiInlet, PS_Fi)
FiCleanWaterTeeToStorage := TeeF(CleanWaterTeeToStorage_Origin, [0; 0; 270]*deg, ND_FiInlet, PS_Fi)
FiCleanWaterCouplingToStorage := CouplingSUBF(CleanWaterCouplingToStorage_Origin, [0; 270; 0]*deg, ND_FiInlet, PS_Fi, ["Room"])
FiCleanWaterOutletReducer := reducerF(CleanWaterOutletReducer_Origin, [0; 270; 0]*deg, ND_FiInlet, ND_CleanWaterOutlet, SocketDepth(ND_CleanWaterOutlet), PS_Fi)
FiCleanWaterOutletElbow := ElbowF(CleanWaterOutletElbow_Origin, [0; 0; 90]*deg, ND_FiInlet, PS_Fi)
FiCleanWaterOutletValve := stack(view("f"), InsertDwg(BallValveDwg, [CleanWaterOutletValve_Origin[0]; CleanWaterOutletValve_Origin[2]; -CleanWaterOutletValve_Origin[1]], ND_CleanWaterOutlet, 90 deg), view("t"))
FiFitToStorageFrz := FreezeLayer("FiFittingsToStorage")
FiFitToStorage := stack(FiFitToStorageLyr, FiCleanWaterElbowNorth, FiCleanWaterElbowNorthU, FiCleanWaterTeeToStorage, FiCleanWaterCouplingToStorage, FiCleanWaterOutletReducer, FiCleanWaterOutletValve, FiCleanWaterOutletElbow, FiFitToStorageFrz)
FiPlumbingToStorageLyr := layer_new("FiPlumbingToStorage", blue)
L_FiUpCleanWaterPipe := CleanWaterElbowToStorageNorthU_Origin[2] - CleanWaterElbowToStorageNorth_Origin[2] - ElbowRadius(ND_FiInlet)
L_FiPerpCleanWaterPipe := CleanWaterTeeToStorage_Origin[0] - CleanWaterElbowToStorageNorthU_Origin[0] - ShortTeeLength(ND_FiInlet) - ElbowRadius(ND_FiInlet)
L_FiDownCleanWaterPipe := CleanWaterOutletElbow_Origin[2] - CleanWaterCouplingToStorage_Origin[2]
L_FiIntCleanWaterPipe := 0.9*H_Wall
FiUpCleanWaterPipe := PipeF(CleanWaterElbowToStorageNorthU_Origin, L_FiUpCleanWaterPipe, [0; 270; 0]*deg, ND_FiInlet, PS_Fi)
FiPerpCleanWaterPipe := PipeF(CleanWaterTeeToStorage_Origin + [-ShortTeeLength(ND_FiInlet); 0; ShortTeeLength(ND_FiInlet)], L_FiPerpCleanWaterPipe, [0; 0; 0]*deg, ND_FiInlet, PS_Fi) = ["_cylinder -1.93749,2.9492,4.11012 0.04445 a -2.89003,2.9492,4.11012"; "_cylinder -1.92749,2.9492,4.11012 0.03896 a -2.90003,2.9492,4.11012"; "_zoom w -2.90003,2.89475,4.11012 -2.88003,3.00365,4.11012"; "_subtract -2.89003,2.99365,4.11012  -2.90003,2.98816,4.11012 "]
FiDownCleanWaterPipe := PipeF(CleanWaterOutletElbow_Origin, L_FiDownCleanWaterPipe, [0; 270; 0]*deg, ND_FiInlet, PS_Fi)
FiIntCleanWaterPipe := PipeSUBF(CleanWaterCouplingToStorage_Origin + [0; 0; -CouplingLength(ND_FiInlet) + 2*SocketDepth(ND_FiInlet)], L_FiIntCleanWaterPipe, [0; 270; 0]*deg, ND_FiInlet, PS_Fi, ["Room"])
FiPlumbingToStorageFrz := FreezeLayer("FiPlumbingToStorage")
FiPipesToStorage := stack(FiPlumbingToStorageLyr, FiUpCleanWaterPipe, FiPerpCleanWaterPipe, FiDownCleanWaterPipe, FiIntCleanWaterPipe, FiPlumbingToStorageFrz)
FiToStoragePlumbing := stack(FiFitToStorage, FiPipesToStorage)
# LFOM Plumbing
FiLfomCoupling_Origin := [-L_Et + S_Fitting + ConRadius(ND_RMPipe); ConRadius(ND_RMPipe); -SocketDepth(ND_RMPipe)] + FlowMeteringTank_Origin
FiLfomElbow_Origin := [
    FiLfomCoupling_Origin[0];
    FiLfomCoupling_Origin[1];
    FlowDistributionTank_Origin[2] - max(CouplingLength(ND_RMPipe), T_Et) - SocketDepth(ND_RMPipe)
]
FiDistInletCoupling_Origin := [
    -S_Fitting - ConRadius(ND_RMPipe) + FlowDistributionTank_Origin[0];
    FiLfomCoupling_Origin[1];
    -SocketDepth(ND_RMPipe) + FlowDistributionTank_Origin[2]
]
FiDistInletElbow_Origin := [
    FiDistInletCoupling_Origin[0];
    FiLfomCoupling_Origin[1];
    FlowDistributionTank_Origin[2] - max(CouplingLength(ND_RMPipe), T_Et) - SocketDepth(ND_RMPipe)
]
RMPipeLyr := layer_new("RapidMixPipes", blue)
FiLfom := PipeF(FiLfomCoupling_Origin, H_Et, [0; 90]*deg, ND_RMPipe, PS_Fi)
LfomOrifices :=
    Local ← FiLfom
    for h ∈ 0 .. last(H_LfomOrifices)
        if N_LfomOrifices[h] ≠ 0
            Local ← stack(Local, CylinderF([
                FiLfomCoupling_Origin[0];
                FiLfomCoupling_Origin[1];
                FlowMeteringTank_Origin[2] + CapHeight(ND_EtFloat) + S_Fitting + H_LfomOrifices[h]
            ], D_LfomOrifices/2, outerradius(ND_RMPipe) + zc, [
                (asin(0.5*S_LfomOrificesMin/(2*outerradius(ND_RMPipe))) + asin(D_LfomOrifices/(2*outerradius(ND_RMPipe))))*(mod(h, 2) == 0);
                0 deg
            ]))
        if N_LfomOrifices[h] > 1
            Local ← stack(Local, ArrayLastPolar([
                FiLfomCoupling_Origin[0];
                FiLfomCoupling_Origin[1];
                FlowMeteringTank_Origin[2] + CapHeight(ND_EtFloat) + S_Fitting + H_LfomOrifices[h]
            ], N_LfomOrifices[h], (N_LfomOrifices[h] - 1)*(2*asin(D_LfomOrifices/(2*outerradius(ND_RMPipe))) + 2*asin(S_LfomOrificesMin/(2*outerradius(ND_RMPipe))))))
    return Local
SubtractLfomOrifices := stack(view("t"), SubtractAll(FiLfomCoupling_Origin + [0; outerradius(ND_RMPipe); 0]))
L_RMPipeEast := FiLfomCoupling_Origin[2] - FiLfomElbow_Origin[2] - CouplingLength(ND_RMPipe) + 2*SocketDepth(ND_RMPipe)
L_RMPipeWest := FiDistInletCoupling_Origin[2] - FiDistInletElbow_Origin[2] - CouplingLength(ND_RMPipe) + 2*SocketDepth(ND_RMPipe)
L_RMPipeHoriz := FiLfomElbow_Origin[0] - FiDistInletElbow_Origin[0] - 2*ElbowRadius(ND_RMPipe)
RMPipeEastVert := PipeSUBF(FiLfomElbow_Origin, L_RMPipeEast, [0; 90]*deg, ND_RMPipe, PS_Fi, ["FlowMeteringTank"])
RMPipeWestVert := PipeSUBF(FiDistInletElbow_Origin, L_RMPipeWest, [0; 90]*deg, ND_RMPipe, PS_Fi, ["FlowDistributionTank"])
RMPipeHoriz := PipeF(FiLfomElbow_Origin + [-ElbowRadius(ND_RMPipe); 0; -ElbowRadius(ND_RMPipe)], L_RMPipeHoriz, [0; 0]*deg, ND_RMPipe, PS_Fi)
RMPipeFrz := FreezeLayer("RapidMixPipes")
RMPipes := stack(RMPipeLyr, LfomOrifices, SubtractLfomOrifices, RMPipeEastVert, RMPipeWestVert, RMPipeHoriz, RMPipeFrz)
RMFitLyr := layer_new("RapidMixFittings", green)
RMCouplingEast := CouplingSUBF(FiLfomCoupling_Origin, [0; 270; 0]*deg, ND_RMPipe, PS_Fi, ["FlowMeteringTank"])
RMElbowEast := ElbowF(FiLfomElbow_Origin, [0; 0; 270]*deg, ND_RMPipe, PS_Fi)
FiDistInletCoupling := CouplingSUBF(FiDistInletCoupling_Origin, [0; 270; 0]*deg, ND_RMPipe, PS_Fi, ["FlowDistributionTank"])
FiDistInletElbow := ElbowF(FiDistInletElbow_Origin, [180; 0; 90]*deg, ND_RMPipe, PS_Fi)
RMFitFrz := FreezeLayer("RapidMixFittings")
RMFittings := stack(RMFitLyr, RMCouplingEast, RMElbowEast, FiDistInletCoupling, FiDistInletElbow, RMFitFrz)
RMPlumbing := stack(RMPipes, RMFittings)
# Channel Inlet Plumbing
FiDistInletCouplingNorth_Origin := [
    -cos(AN_FiIn)*L_FiPipeToInletVertCenterLine + FiPipe_Origin[0];
    -sin(AN_FiIn)*L_FiPipeToInletVertCenterLine + FiPipe_Origin[1];
    FlowDistributionTank_Origin[2] - SocketDepth(ND_FiInlet)
]
FiDistInletCouplingMid_Origin := [
    -cos(AN_FiIn)*L_FiPipeToInletVertCenterLine + FiPipe_Origin[0];
    -sin(AN_FiIn)*L_FiPipeToInletVertCenterLine - B_Fi + FiPipe_Origin[1];
    FlowDistributionTank_Origin[2] - SocketDepth(ND_FiInlet)
]
FiDistInletCouplingSouth_Origin := [
    -cos(AN_FiIn)*L_FiPipeToInletVertCenterLine + FiPipe_Origin[0];
    FiPipe3_Origin[1] + sin(AN_FiIn)*L_FiPipeToInletVertCenterLine;
    FlowDistributionTank_Origin[2] - SocketDepth(ND_FiInlet)
]
FiDistInletFitLyr := layer_new("FiDistInletFittings", green)
FiDistInletCouplingNorth := CouplingSUBF(FiDistInletCouplingNorth_Origin, [0; 270; 0]*deg, ND_FiInlet, PS_Fi, ["FlowDistributionTank"])
FiDistInletCouplingMid := CouplingSUBF(FiDistInletCouplingMid_Origin, [0; 270; 0]*deg, ND_FiInlet, PS_Fi, ["FlowDistributionTank"])
FiDistInletCouplingSouth := CouplingSUBF(FiDistInletCouplingSouth_Origin, [0; 270; 0]*deg, ND_FiInlet, PS_Fi, ["FlowDistributionTank"])
FiDistInletFitFrz := FreezeLayer("FiDistInletFittings")
FiDistInletFit := stack(FiDistInletFitLyr, FiDistInletCouplingNorth, FiDistInletCouplingMid, FiDistInletCouplingSouth, FiDistInletFitFrz)
FiDistInletPipeLyr := layer_new("FiDistInletPipes", blue)
FiDistInletPipeNorth := PipeF(FiDistInletCouplingNorth_Origin, H_FiDistTank + SocketDepth(ND_FiInlet), [0; 90]*deg, ND_FiInlet, PS_Fi)
FiDistInletPipeMid := PipeF(FiDistInletCouplingMid_Origin, H_FiDistTank + SocketDepth(ND_FiInlet), [0; 90]*deg, ND_FiInlet, PS_Fi)
FiDistInletPipeSouth := PipeF(FiDistInletCouplingSouth_Origin, H_FiDistTank + SocketDepth(ND_FiInlet), [0; 90]*deg, ND_FiInlet, PS_Fi)
DiFistInletPipeFrz := FreezeLayer("FiDistInletPipes")
FiDistInletOrificeNorth := CylinderF(FiDistInletCouplingNorth_Origin + [0; 0; H_OrificeBottom + D_InletOrifice/2 + SocketDepth(ND_FiInlet)], D_InletOrifice/2, outerradius(ND_FiInlet) + zc, [0; 0; 0]*deg)
FiDistInletOrificeMid := CylinderF(FiDistInletCouplingMid_Origin + [0; 0; H_OrificeBottom + D_InletOrifice/2 + SocketDepth(ND_FiInlet)], D_InletOrifice/2, outerradius(ND_FiInlet) + zc, [0; 0; 0]*deg)
FiDistInletOrificeSouth := CylinderF(FiDistInletCouplingSouth_Origin + [0; 0; H_OrificeBottom + D_InletOrifice/2 + SocketDepth(ND_FiInlet)], D_InletOrifice/2, outerradius(ND_FiInlet) + zc, [0; 0; 0]*deg)
SubtractFiInletOrifices := SubtractF(["FiDistInletPipes"], "DeleteMe")
FiDistInletPipes := stack(FiDistInletPipeLyr, FiDistInletPipeNorth, FiDistInletPipeMid, FiDistInletPipeSouth, DiFistInletPipeFrz, FiDistInletOrificeNorth, FiDistInletOrificeMid, FiDistInletOrificeSouth, GroupDelete, SubtractFiInletOrifices)
FiDistPlu := stack(FiDistInletFit, FiDistInletPipes)
# Chemical Doser
LA_Origin := [
    FlowMeteringTank_Origin[0] - L_Et - T_Et;
    FlowMeteringTank_Origin[1] + S_EtFloat/2 + W_Et/2;
    FlowMeteringTank_Origin[2] + H_Et + D_LABOrigintoLAOriginZ
] = [-0.820662; 0.192075; 5.90433] m
LA2_Origin := [LA_Origin[0]; LA_Origin[1] - S_EtFloat - 1/8*in; LA_Origin[2]] = [-0.820662; 0.0889; 5.90433] m
LADtFitting_Origin := [
    LA_Origin[0] + L_CdcLever - L_LAOriginToDtY + innerdiameter(ND_DropTube, PS_Modules)/2 - .02 in;
    LA_Origin[1] + 1/8*in + L_LAOriginToDtCenterX;
    L_LAOriginToDtZ + LA2_Origin[2]
]
LAReducerFitting_Origin := [-L_LAOriginToReducerY - T_CdcReducer + L_CdcLever/2; L_LAOriginToReducerX; L_LAOriginToDtZ] + LA_Origin
LADt_Center := [
    LA_Origin[0] + L_CdcLever - L_LAOriginToDtY;
    LA_Origin[1] + L_LAOriginToDtCenterX;
    LA_Origin[2] + L_LAOriginToDtZ + H_LeverArm
]
LAReducer_Center := LA_Origin + [-L_LAOriginToReducerCenterY; L_LAOriginToReducerCenterX; L_LAOriginToDtZ]
LA2DtFitting_Origin := [
    LA2_Origin[0] + L_CdcLever - L_LAOriginToDtY + innerdiameter(ND_DropTube, PS_Modules)/2 - .02 in;
    LA2_Origin[1] + 1/8*in + L_LAOriginToDtCenterX;
    LA2_Origin[2] + L_LAOriginToDtZ
]
LA2ReducerFitting_Origin := [-L_LAOriginToReducerY - T_CdcReducer + L_CdcLever/2; L_LAOriginToReducerX; L_LAOriginToDtZ] + LA2_Origin
LA2Dt_Center := [
    LA2_Origin[0] + L_CdcLever - L_LAOriginToDtY;
    LA2_Origin[1] + L_LAOriginToDtCenterX;
    LA2_Origin[2] + L_LAOriginToDtZ + H_LeverArm
]
LA2Reducer_Center := LA2_Origin + [-L_LAOriginToReducerCenterY; L_LAOriginToReducerCenterX; L_LAOriginToDtZ]
CdcSliderLyr := layer_new("CdcSlider", grey)
SliderNorth := BoxF([LADt_Center[0] - 1 in; LADt_Center[1] - outerradius(ND_DropTube); LA_Origin[2] - 1/4*in], [
    LADt_Center[0] + 1 in;
    LADt_Center[1] - outerradius(ND_DropTube) - 3/4*in;
    LA_Origin[2] + H_LeverArm - 1/4*in
], [0; 0; 0]*deg)
SliderSouth := BoxF([
    LA2Dt_Center[0] - 1 in;
    LADt_Center[1] - outerradius(ND_DropTube) - S_EtFloat - 1/8*in;
    LA_Origin[2] - 1/4*in
], [
    LA2Dt_Center[0] + 1 in;
    LADt_Center[1] - outerradius(ND_DropTube) - 3/4*in - S_EtFloat - 1/8*in;
    LA_Origin[2] + H_LeverArm - 1/4*in
], [0; 0; 0]*deg)
CdcSliderFrz := FreezeLayer("CdcSlider")
NorthLArmSubBox := BoxF([LADt_Center[0] - 2 in; LA_Origin[1] + 1/8*in; LA_Origin[2]], [LADt_Center[0] + 2 in; LA_Origin[1]; LA_Origin[2] + H_LeverArm], [0; 0; 0]*deg)
SouthLArmSubBox := BoxF([LA2Dt_Center[0] - 2 in; LA_Origin[1] - S_EtFloat - 1/8*in; LA_Origin[2]], [LA2Dt_Center[0] + 2 in; LA_Origin[1] - S_EtFloat; LA_Origin[2] + H_LeverArm], [0; 0; 0]*deg)
SubtractLArm := SubtractF(["CdcSlider"], "DeleteMe")
CdcSlider := stack(CdcSliderLyr, SliderNorth, SliderSouth, CdcSliderFrz, NorthLArmSubBox, SouthLArmSubBox, GroupDelete, SubtractLArm)
W_Bracket := 2 in
CdcBracketLyr := layer_new("CdcBracket", ltgrey)
BracketOuter := BoxF([LA_Origin[0]; LA_Origin[1] + 1/4*in; FlowMeteringTank_Origin[2] + H_Et], [LA_Origin[0] + W_Bracket; LA_Origin[1] - S_EtFloat - 1/4*in; LA_Origin[2] + H_LeverArm], [0; 0; 0]*deg)
CdcBracketFrz := FreezeLayer("CdcBracket")
BracketInner := BoxF([LA_Origin[0] - zc; LA_Origin[1] + 1/8*in; FlowMeteringTank_Origin[2] + H_Et + 1/8*in], [LA_Origin[0] + 2 in + zc; LA_Origin[1] - S_EtFloat - 1/8*in; LA_Origin[2] + H_LeverArm + 1/8*in], [0; 0; 0]*deg)
SubtractBracket := SubtractF(["CdcBracket"], "DeleteMe")
CdcBracket := stack(CdcBracketLyr, BracketOuter, CdcBracketFrz, BracketInner, GroupDelete, SubtractBracket)
CdcLayer := layer_new("CdcLayer", ltgrey)
LArmOuter := BoxF([LA_Origin[0] - L_CdcLever - 1/2*in; LA_Origin[1] + 1/8*in; LA_Origin[2]], [LA_Origin[0] + L_CdcLever + 1/2*in; LA_Origin[1] - S_EtFloat - 1/8*in; LA_Origin[2] + H_LeverArm], [0; 0; 0]*deg)
LArmInner := BoxF([LA_Origin[0] - L_CdcLever; LA_Origin[1]; LA_Origin[2] - zc], [LA_Origin[0] + L_CdcLever; LA_Origin[1] - S_EtFloat; LA_Origin[2] + H_LeverArm + zc], [0; 0; 0]*deg)
SubtractLArmInner := SubtractF(["CdcLayer"], "DeleteMe")
SelectCdcLyr := SelectLayer("CdcLayer")
LArmBar := CylinderSUBF([LA_Origin[0] + W_Bracket/2; LA_Origin[1] + 1/2*in; LA_Origin[2] + H_LeverArm/2], R_LArmBar, S_EtFloat + 1 in, [90; 0]*deg, ["CdcLayer"])
DropTube1 := PipeF(LADt_Center, L_DropTube, [0; -90]*deg, ND_DropTube, PS_Modules)
InsertCht := insertdwg("https://confluence.cornell.edu/download/attachments/173604905/CdcCht.dwg", CHT_Origin, 1, 1, 90 deg)
DropTube2 := PipeF(LA2Dt_Center, L_DropTube, [0; -90]*deg, ND_DropTube, PS_Modules)
InsertCht2 := insertdwg("https://confluence.cornell.edu/download/attachments/173604905/CdcCht.dwg", CHT2_Origin, 1, 1, 90 deg)
FreezeCdcLayer := FreezeLayer("CdcLayer")
CdcFloatLyr := layer_new("CdcFloat", yellow)
L_CdcFloat := LA_Origin[2] - (FlowMeteringTank_Origin[2] + H_Et - H_Freeboard - HL_Lfom + CapHeight(ND_EtFloat)) = 0.0984 m
FloatCable := CylinderF([
    LA_Origin[0] + L_CdcLever;
    FlowMeteringTank_Origin[1] + W_Et/2;
    FlowMeteringTank_Origin[2] + H_Et - H_Freeboard - HL_Lfom + CapHeight(ND_EtFloat)
], D_Cable, L_CdcFloat, [0; 90]*deg)
CdcFloatCapTop := CapF([
    LA_Origin[0] + L_CdcLever;
    FlowMeteringTank_Origin[1] + W_Et/2;
    FlowMeteringTank_Origin[2] + H_Et - H_Freeboard - HL_Lfom + CapHeight(ND_EtFloat) - CapThickness(ND_EtFloat)
], [0; -90]*deg, ND_EtFloat)
CdcFloatCapBottom := CapF([
    LA_Origin[0] + L_CdcLever;
    FlowMeteringTank_Origin[1] + W_Et/2;
    FlowMeteringTank_Origin[2] + H_Et - H_Freeboard - HL_Lfom - CapHeight(ND_EtFloat) + CapThickness(ND_EtFloat)
], [0; 90]*deg, ND_EtFloat)
CdcFloatPipe := PipeF([
    LA_Origin[0] + L_CdcLever;
    FlowMeteringTank_Origin[1] + W_Et/2;
    FlowMeteringTank_Origin[2] + H_Et - H_Freeboard - HL_Lfom + CapHeight(ND_EtFloat) - CapThickness(ND_EtFloat)
], 2*CapHeight(ND_EtFloat) - 2*CapThickness(ND_EtFloat), [0; -90]*deg, ND_EtFloat, PS_Default)
CdcFloatFrz := FreezeLayer("CdcFloat")
CdcFloat := stack(CdcFloatLyr, FloatCable, CdcFloatCapTop, CdcFloatCapBottom, CdcFloatPipe, CdcFloatFrz)
ChemDoser := stack(CdcSlider, CdcBracket, CdcLayer, LArmOuter, FreezeCdcLayer, LArmInner, GroupDelete, SubtractLArmInner, SelectCdcLyr, LArmBar, DropTube1, DropTube2, FreezeCdcLayer, CdcFloat)
# Roof
H_Standing := 7.5 ft = 2.286 m
Z_RoofHigh := Z_ChemPlatformTop + H_Standing = 8.31493 m
Z_RoofLow := FlowDistributionTank_Origin[2] + H_FiDistTank + 4/5*H_Standing = 7.48936 m
WedgeRoofCut := WedgeF(Tank_Origin + [-L_Wall - T_TankWall - zc; -T_TankWall - zc; Z_RoofHigh + zc], Tank_Origin + [T_TankWall + zc; W_Wall + T_TankWall + zc; Z_RoofLow + zc], [0; 0; 0]*deg)
SubtractRoof := SubtractF(["Room"], "DeleteMe")
RoofLyr := layer_new("Roof", purple)
AN_Roof := atan((Z_RoofHigh - Z_RoofLow)/(L_Wall + 2*(T_TankWall + zc))) = 0.230372
Roof := BoxF(Tank_Origin + [T_TankWall + zc; W_Wall + T_TankWall + zc; Z_RoofHigh + zc], Tank_Origin + [
    T_TankWall + zc - sqrt((Z_RoofHigh - Z_RoofLow)^2 + ((L_Wall + 2*(T_TankWall + zc))^2));
    -T_TankWall - zc;
    Z_RoofHigh + zc - T_EtBaffle
], [0; -AN_Roof/deg; 0]*deg)
FrzRoof := FreezeLayer("Roof")
Roof := stack(WedgeRoofCut, GroupDelete, SubtractRoof, RoofLyr, Roof, FrzRoof)
# Plant Drains
# Chem Drains
ChemDrainCoupling_Origin := [
    Tank_Origin[0] - ConRadius(ND_ChemPlatformDrain);
    Tank_Origin[1] - ConRadius(ND_ChemPlatformDrain) + W_Wall;
    Z_ChemPlatformTop - SocketDepth(ND_ChemPlatformDrain)
]
ChemDrainElbowR_Origin := [
    ChemDrainCoupling_Origin[0];
    ChemDrainCoupling_Origin[1];
    Z_DoorTop + ConRadius(ND_ChemPlatformDrain) + ElbowRadius(ND_ChemPlatformDrain)
] = [-0.028575; 2.97142; 5.28511] m
ChemDrainElbowUnder_Origin := [
    FlowDistributionTank_Origin[0];
    ChemDrainElbowR_Origin[1];
    ChemDrainElbowR_Origin[2] - ElbowRadius(ND_ChemPlatformDrain)
]
ChemDrainElbowDown_Origin := [
    ChemDrainElbowUnder_Origin[0] - ElbowRadius(ND_ChemPlatformDrain);
    ChemDrainElbowUnder_Origin[1] - ElbowRadius(ND_ChemPlatformDrain) - 2*ConRadius(ND_FiInlet) - ConRadius(ND_ChemPlatformDrain);
    ChemDrainElbowUnder_Origin[2]
]
DrainChannelElbow_Origin := [
    Tank_Origin[0] - L_Wall + ConRadius(ND_SystemDrain);
    Tank_Origin[1] + W_Wall + T_TankWall + SocketDepth(ND_SystemDrain);
    Tank_Origin[2] + H_Wall + T_TankWall
]
DrainChannelCoupling_Origin := [
    DrainChannelElbow_Origin[0];
    Tank_Origin[1] + W_Wall + SocketDepth(ND_SystemDrain);
    DrainChannelElbow_Origin[2]
]
DrainChannelElbowOutlet_Origin := DrainChannelElbow_Origin + [0; ElbowRadius(ND_SystemDrain); -Z_BottomLowerTank + ElbowRadius(ND_SystemDrain)]
SystemDrainFitLyr := layer_new("SystemDrainFittings", green)
ChemDrainCoupling := CouplingSUBF(ChemDrainCoupling_Origin, [0; 270]*deg, ND_ChemPlatformDrain, PS_Fi, ["OperatorAccess"])
ChemDrainElbowR := ElbowF(ChemDrainElbowR_Origin, [0; 0; 270]*deg, ND_ChemPlatformDrain, PS_Fi)
ChemDrainElbowUnder := ElbowF(ChemDrainElbowUnder_Origin, [90; 0; 0]*deg, ND_ChemPlatformDrain, PS_Fi)
ChemDrainElbowDown := ElbowF(ChemDrainElbowDown_Origin, [180; 90; 0]*deg, ND_ChemPlatformDrain, PS_Fi)
DrainChannelElbow := ElbowF(DrainChannelElbow_Origin, [0; 270; 0]*deg, ND_SystemDrain, PS_Fi)
DrainChannelCoupling := CouplingSUBF(DrainChannelCoupling_Origin, [270; 0]*deg, ND_SystemDrain, PS_Fi, ["Room"])
DrainElbowOutlet := ElbowF(DrainChannelElbowOutlet_Origin, [270; 90; 0]*deg, ND_SystemDrain, PS_Fi)
SystemDrainFitFrz := FreezeLayer("SystemDrainFittings")
SystemDrainFit := stack(SystemDrainFitLyr, ChemDrainCoupling, ChemDrainElbowR, ChemDrainElbowUnder, ChemDrainElbowDown, DrainChannelElbow, DrainChannelCoupling, DrainElbowOutlet, SystemDrainFitFrz)
SystemDrainPipesLyr := layer_new("SystemDrainPipes", blue)
L_ChemPlatformDrainPipe := ChemDrainCoupling_Origin[2] - CouplingLength(ND_ChemPlatformDrain) + 2*SocketDepth(ND_ChemPlatformDrain) - ChemDrainElbowR_Origin[2]
L_ChemPlatformDrainHoriz := ChemDrainElbowR_Origin[0] - ChemDrainElbowUnder_Origin[0] - ElbowRadius(ND_SystemDrain)
L_ChemPlatformDrainPerp := ChemDrainElbowUnder_Origin[1] - ChemDrainElbowDown_Origin[1] - ElbowRadius(ND_SystemDrain)
L_ChemDrainDown := (ChemDrainElbowUnder_Origin[2] - Tank_Origin[2] - H_Wall - T_TankWall)*0.85
L_DrainChannelPipe := DrainChannelElbow_Origin[1] - DrainChannelCoupling_Origin[1] - CouplingLength(ND_SystemDrain) + 2*SocketDepth(ND_SystemDrain)
L_DrainOutlet := Z_BottomLowerTank - 2*ElbowRadius(ND_SystemDrain)
ChemPlatformDrainPipe := PipeSUBF(ChemDrainElbowR_Origin, L_ChemPlatformDrainPipe, [0; 90; 0]*deg, ND_ChemPlatformDrain, PS_Fi, ["OperatorAccess"])
ChemDrainHoriz := PipeF(ChemDrainElbowR_Origin + [-ElbowRadius(ND_SystemDrain); 0; -ElbowRadius(ND_SystemDrain)], L_ChemPlatformDrainHoriz, [0; 0; 0]*deg, ND_ChemPlatformDrain, PS_Fi)
ChemDrainPerp := PipeF(ChemDrainElbowDown_Origin, L_ChemPlatformDrainPerp, [270; 0; 0]*deg, ND_ChemPlatformDrain, PS_Fi)
ChemDrainDown := PipeF(ChemDrainElbowDown_Origin + [0; -ElbowRadius(ND_SystemDrain); -ElbowRadius(ND_SystemDrain)], L_ChemDrainDown, [0; 270; 0]*deg, ND_ChemPlatformDrain, PS_Fi)
DrainChannelPipe := PipeSUBF(DrainChannelCoupling_Origin + [0; CouplingLength(ND_SystemDrain) - 2*SocketDepth(ND_SystemDrain); 0], L_DrainChannelPipe, [270; 0; 0]*deg, ND_SystemDrain, PS_Fi, ["Room"])
DrainOutletPipe := PipeF(DrainChannelElbow_Origin + [0; ElbowRadius(ND_SystemDrain); -ElbowRadius(ND_SystemDrain)], L_DrainOutlet, [0; 270; 0]*deg, ND_SystemDrain, PS_Fi)
SystemDrainPipesFrz := FreezeLayer("SystemDrainPipes")
SystemDrainPipes := stack(SystemDrainPipesLyr, ChemPlatformDrainPipe, ChemDrainHoriz, ChemDrainPerp, ChemDrainDown, DrainChannelPipe, DrainOutletPipe, SystemDrainPipesFrz)
SystemDrain := stack(SystemDrainFit, SystemDrainPipes)
L_SedimentSettle := 10 cm
ND_ChemDrains := 1/2*in
L_DosingBulkheadOffset := R_CoagTank - BulkheadSocketOuterD(ND_ChemDrains)*0.5/tan(asin(BulkheadSocketOuterD(ND_ChemDrains)/(2*R_CoagTank))) = 6.55829e-5 m
CoagDosingBulkhead_Origin := CoagTank_Origin + [0; -R_CoagTank + L_DosingBulkheadOffset; B_StockOutlet]
CoagDosingSlipToThread_Origin := CoagDosingBulkhead_Origin + [0; -BulkheadThreadLength(ND_ChemDrains) + SocketDepth(ND_ChemDrains); 0]
CoagDosingElbowU_Origin := CoagDosingSlipToThread_Origin + [0; SocketDepth(ND_ChemDrains) - CouplingLength(ND_ChemDrains); 0]
CoagDosingTee_Origin := [
    CoagDosingElbowU_Origin[0] + ShortTeeLength(ND_ChemDrains);
    -ElbowRadius(ND_ChemDrains) + CoagDosingElbowU_Origin[1];
    Z_ChemPlatformTop - T_Platform - SocketDepth(ND_ChemDrains) - ShortTeeLength(ND_ChemDrains)
]
CoagSedTrapValve_Origin := CoagDosingTee_Origin + [
    -ShortTeeLength(ND_ChemDrains);
    0;
    -SocketDepth(ND_ChemDrains) - BallValveSocket(ND_ChemDrains) - ShortTeeLength(ND_ChemDrains)
]
CoagSedTrapElbow_Origin := CoagSedTrapValve_Origin + [
    0;
    0;
    -BallValveLength(ND_ChemDrains) + BallValveSocket(ND_ChemDrains) - SocketDepth(ND_ChemDrains)
]
CoagDrainBulkhead_Origin := CoagTank_Origin
CoagDrainTee_Origin := [
    CoagDrainBulkhead_Origin[0];
    CoagDrainBulkhead_Origin[1];
    CoagSedTrapElbow_Origin[2] - ElbowRadius(ND_ChemDrains) + ShortTeeLength(ND_ChemDrains)
]
CoagDrainValve_Origin := CoagDrainTee_Origin + [0; 0; SocketDepth(ND_ChemDrains) + BallValveLength(ND_ChemDrains) - BallValveSocket(ND_ChemDrains)]
CoagDrainElbowWall_Origin := [
    CoagSedTrapElbow_Origin[0];
    Tank_Origin[1] + W_Wall - ElbowRadius(ND_ChemDrains) - ConRadius(ND_ChemDrains);
    CoagSedTrapElbow_Origin[2] - ElbowRadius(ND_ChemDrains)
]
CoagDosingElbow_Origin := [
    Tank_Origin[0] - ConRadius(ND_ChemDrains);
    CoagDosingTee_Origin[1] - ElbowRadius(ND_ChemDrains);
    CoagDosingTee_Origin[2]
]
ChlorineDosingElbow_Origin := [
    Tank_Origin[0] - W_ChemPlatform/2 + ConRadius(ND_ChemDrains);
    CoagDosingElbow_Origin[1];
    CoagDosingElbow_Origin[2]
]
CoagDosingElbowUp_Origin := [
    CoagDosingElbow_Origin[0];
    ChemPlatform_Origin[1] - ConRadius(ND_ChemDrains);
    ElbowRadius(ND_ChemDrains) + CoagDosingElbow_Origin[2]
]
CoagDosingElbowL_Origin := CoagDosingElbowUp_Origin + [0; 0; 2*SocketDepth(ND_ChemDrains)]
CoagDosingValve_Origin := [
    -ElbowRadius(ND_ChemDrains) - SocketDepth(ND_ChemDrains) - BallValveSocket(ND_ChemDrains);
    0;
    ElbowRadius(ND_ChemDrains)
] + CoagDosingElbowL_Origin = [-0.035043; 1.64311; 5.88076] m
CoagTeeToCalCol_Origin := CoagDosingValve_Origin + [BallValveSocket(ND_ChemDrains) - BallValveLength(ND_ChemDrains) - SocketDepth(ND_ChemDrains); 0; 0]
CoagCalColValve_Origin := CoagTeeToCalCol_Origin + [-ShortTeeLength(ND_ChemDrains); 0; ShortTeeLength(ND_ChemDrains) + BallValveSocket(ND_ChemDrains)]
ChemFittingLyr := layer_new("ChemFittings", green)
CoagDosingBulkhead := InsertDwg(BulkheadDwg, CoagDosingBulkhead_Origin, ND_ChemDrains, 270 deg)
CoagDosingSlipToThread := CouplingF(CoagDosingSlipToThread_Origin, [90; 0; 0]*deg, ND_ChemDrains, PS_Fi)
CoagDosingElbowU := ElbowF(CoagDosingElbowU_Origin, [180; 90; 0]*deg, ND_ChemDrains, PS_Fi)
CoagDosingTee := TeeF(CoagDosingTee_Origin, [270; 0; 90]*deg, ND_ChemDrains, PS_Fi)
CoagSedTrapElbow := ElbowF(CoagSedTrapElbow_Origin, [270; 90; 0]*deg, ND_ChemDrains, PS_Fi)
CoagDrainTee := TeeF(CoagDrainTee_Origin, [90; 90; 0]*deg, ND_ChemDrains, PS_Fi)
CoagDrainElbowWall := ElbowF(CoagDrainElbowWall_Origin, [0; 270; 0]*deg, ND_ChemDrains, PS_Fi)
CoagSedTrapValve := InsertDwg(BallValveDwg, [CoagSedTrapValve_Origin[0]; CoagSedTrapValve_Origin[2]; -CoagSedTrapValve_Origin[1]], ND_ChemDrains, 90 deg)
CoagDrainValve := InsertDwg(BallValveDwg, [CoagDrainValve_Origin[0]; CoagDrainValve_Origin[2]; -CoagDrainValve_Origin[1]], ND_ChemDrains, 90 deg)
CoagDrainBulkhead := InsertDwg(BulkheadDwg, [CoagDrainBulkhead_Origin[0]; CoagDrainBulkhead_Origin[2]; -CoagDrainBulkhead_Origin[1]], ND_ChemDrains, 90 deg)
ChemFittingFrz := FreezeLayer("ChemFittings")
ChemFittings := stack(ChemFittingLyr, CoagDosingBulkhead, CoagDosingSlipToThread, CoagDosingElbowU, CoagDosingTee, CoagSedTrapElbow, CoagDrainTee, CoagDrainElbowWall, view("f"), CoagSedTrapValve, CoagDrainValve, CoagDrainBulkhead, view("t"), ChemFittingFrz)
ChemPipeLyr := layer_new("ChemPipes", blue)
L_ChemDosingPipeDown := CoagDosingElbowU_Origin[2] - CoagDosingTee_Origin[2] - ElbowRadius(ND_ChemDrains) - ShortTeeLength(ND_ChemDrains)
L_ChemDrainPipeDown := CoagDrainBulkhead_Origin[2] - CoagDrainValve_Origin[2]
L_ChemSedTrapToDrain := CoagDrainTee_Origin[1] - CoagSedTrapElbow_Origin[1] - ElbowRadius(ND_ChemDrains) - ShortTeeLength(ND_ChemDrains)
L_ChemDrainToWall := CoagDrainElbowWall_Origin[1] - CoagDrainTee_Origin[1] - ShortTeeLength(ND_ChemDrains)
ChemDosingPipeDown := PipeSUBF(CoagDosingElbowU_Origin + [0; -ElbowRadius(ND_ChemDrains); -ElbowRadius(ND_ChemDrains)], L_ChemDosingPipeDown, [0; 270; 0]*deg, ND_ChemDrains, PS_Fi, ["OperatorAccess"])
ChemDrainPipeDown := PipeF(CoagDrainBulkhead_Origin, L_ChemDrainPipeDown, [0; 270; 0]*deg, ND_ChemDrains, PS_Fi)
ChemSedTrapToDrain := PipeF(CoagSedTrapElbow_Origin + [0; ElbowRadius(ND_ChemDrains); -ElbowRadius(ND_ChemDrains)], L_ChemSedTrapToDrain, [270; 0; 0]*deg, ND_ChemDrains, PS_Fi)
ChemDrainToWall := PipeF(CoagDrainElbowWall_Origin, L_ChemDrainToWall, [90; 0; 0]*deg, ND_ChemDrains, PS_Fi)
ChemPipeFrz := FreezeLayer("ChemPipes")
ChemPipes := stack(ChemPipeLyr, ChemDosingPipeDown, ChemDrainPipeDown, ChemSedTrapToDrain, ChemDrainToWall, ChemPipeFrz)
ChemPlumbingInitial := stack(ChemFittings, ChemPipes, ThawMultiple(["Chem*"]), Array_All(1, 2, -(2*R_CoagTank + S_Fitting/2)), FreezeMultiple(["Chem*"]))
SelectCoagFit := SelectLayer("ChemFittings")
CoagDosingElbow := ElbowF(CoagDosingElbow_Origin, [0; 0; 0]*deg, ND_ChemDrains, PS_Fi)
ChloringDosingElbow := ElbowF(ChlorineDosingElbow_Origin, [0; 0; 0]*deg, ND_ChemDrains, PS_Fi)
SelectCoagPipe := SelectLayer("ChemPipes")
L_CoagDosingPipeToWall := CoagDosingElbow_Origin[0] - CoagDosingTee_Origin[0] - ElbowRadius(ND_ChemDrains)
L_ChlorineDosingPipeToWall := ChlorineDosingElbow_Origin[0] - (CoagDosingTee_Origin[0] - (2*R_CoagTank + S_Fitting/2)) - ElbowRadius(ND_ChemDrains)
CoagDosePipeToWall := PipeF(CoagDosingElbow_Origin + [-ElbowRadius(ND_ChemDrains); ElbowRadius(ND_ChemDrains); 0], L_CoagDosingPipeToWall, [0; 0; 0]*deg, ND_ChemDrains, PS_Fi)
ChlorineDosePipeToWall := PipeF(ChlorineDosingElbow_Origin + [-ElbowRadius(ND_ChemDrains); ElbowRadius(ND_ChemDrains); 0], L_ChlorineDosingPipeToWall, [0; 0; 0]*deg, ND_ChemDrains, PS_Fi)
ChemDosePipesToWall := stack(SelectCoagFit, CoagDosingElbow, ChloringDosingElbow, ChemFittingFrz, SelectCoagPipe, CoagDosePipeToWall, ChlorineDosePipeToWall, ChemPipeFrz)
CoagFitMLayer := layer_new("MChemFittings", green)
CoagDosingElbowUp := ElbowF(CoagDosingElbowUp_Origin, [270; 90; 0]*deg, ND_ChemDrains, PS_Fi)
CoagDosingElbowL := ElbowF(CoagDosingElbowL_Origin, [0; 0; 90]*deg, ND_ChemDrains, PS_Fi)
CoagDosingValve := InsertDwg(BallValveDwg, CoagDosingValve_Origin, ND_ChemDrains, 0 deg)
CoagTeeToCalCol := TeeF(CoagTeeToCalCol_Origin, [270; 0; 90]*deg, ND_ChemDrains, 0 deg)
CoagCalColValve := InsertDwg(BallValveDwg, [CoagCalColValve_Origin[0]; CoagCalColValve_Origin[2]; -CoagCalColValve_Origin[1]], ND_ChemDrains, 270 deg)
CoagFitMFrz := FreezeLayer("MChemFittings")
CoagFitM := stack(CoagFitMLayer, CoagDosingElbowUp, CoagDosingElbowL, CoagDosingValve, CoagTeeToCalCol, view("f"), CoagCalColValve, view("t"), CoagFitMFrz)
CoagPipeMLyr := layer_new("MChemPipes", blue)
L_CoagDosingPerp := CoagDosingElbow_Origin[1] - CoagDosingElbowUp_Origin[1] - ElbowRadius(ND_ChemDrains)
L_CalColPipe := 1 ft + SocketDepth(ND_ChemDrains)
CoagDosingPerpPipe := PipeF(CoagDosingElbow_Origin, L_CoagDosingPerp, [90; 0; 0]*deg, ND_ChemDrains, PS_Fi)
CoagCalCol := PipeF(CoagCalColValve_Origin + [0; 0; BallValveLength(ND_ChemDrains) - 2*BallValveSocket(ND_ChemDrains)], L_CalColPipe, [0; 90; 0]*deg, ND_ChemDrains, PS_Fi)
CoagPipeMFrz := FreezeLayer("MChemPipes")
CoagPipeM := stack(CoagPipeMLyr, CoagDosingPerpPipe, CoagCalCol, CoagPipeMFrz)
CoagM := stack(CoagFitM, CoagPipeM, ThawMultiple(["MChem*"]), MirrorGroup([Tank_Origin[0] - W_ChemPlatform/4; CoagTank_Origin[1]], [Tank_Origin[0] - W_ChemPlatform/4; CoagTank_Origin[1] + zc], "MChem*", "n"), FreezeMultiple(["MChem*"]))
ChemPlumbing := stack(ChemPlumbingInitial, ChemDosePipesToWall, CoagM)
# Chemical Drains/Dosing Plumbing
AC_LFSRSF := stack(Tanks, FiBodyPipe, FiBwPlu, FiInExManPlu, FiTesterScript, FiCapsScript, FiSandDrainScript, FiArray, OpAccessScript, FiAuxPlumbing, RMPlumbing, DrainChannel, FiDistPlu, FiToStoragePlumbing, ChemDoser, Roof, SystemDrain, ChemPlumbing, ChemTanksScript)
# [component: inputs AC_LFSRSF]
# [component: inputs UnionF([-4; -3; -6]*m, [90; 0]*deg, 6 in, PS_Fi)]
# [component: inputs stack(FiBodyPipe, DrawFiManPipes, DrawFiManFittings, ArrayFiManifolds, FiBwPlu, FiInExManPlu, FiTesterScript, FiCapsScript, FiSandDrainScript)]
# [component: inputs FiSlottedSample]
# Materials List
ItemDescribe(ND, type) := concat(stringit_nounits(ND/in), "in ND ", type)
SystemInletPlumbing := ["Quantity", "Length", "Item"; "1", stringit(0 m), ItemDescribe(ND_Transmission, "Coupling")]
RapidMixPipes := [
    "Quantity", "Length", "Item";
    "1", stringit(H_Et), ItemDescribe(ND_RMPipe, "LFOM Pipe");
    "1", stringit(L_RMPipeEast), ItemDescribe(ND_RMPipe, "Pipe");
    "1", stringit(L_RMPipeWest), ItemDescribe(ND_RMPipe, "Pipe");
    "1", stringit(L_RMPipeHoriz), ItemDescribe(ND_RMPipe, "Pipe");
    "2", stringit(0 m), ItemDescribe(ND_RMPipe, "Elbow");
    "2", stringit(0 m), ItemDescribe(ND_RMPipe, "Coupling")
]
EtOverflowDrain := [
    "Quantity", "Length", "Item";
    "1", stringit(L_EtOverflowPipe), ItemDescribe(ND_EtOverflow, "Pipe");
    "1", stringit(L_EtOverflowPipeWall), ItemDescribe(ND_EtOverflow, "Pipe");
    "1", stringit(L_EtOverflowPipeDrain), ItemDescribe(ND_EtOverflow, "Pipe");
    "1", stringit(L_EtOverflowPipeUnder), ItemDescribe(ND_EtOverflow, "Pipe");
    "2", stringit(0 m), ItemDescribe(ND_EtOverflow, "Elbow");
    "1", stringit(0 m), ItemDescribe(ND_EtOverflow, "Coupling")
]
FilterInletPlumbing := [
    "Quantity", "Length", "Item";
    stringit_nounits(N_Fi), stringit(0 m), ItemDescribe(ND_FiWeir, "Tailpiece");
    stringit_nounits(N_Fi), stringit(H_PipeWeir), ItemDescribe(ND_FiWeir, "Pipe");
    stringit_nounits(N_Fi), stringit(0 m), ItemDescribe(ND_FiInlet, "Coupling");
    stringit_nounits(N_Fi), stringit(0 m), ItemDescribe(ND_FiInlet, "Union");
    stringit_nounits(N_Fi), stringit(L_InletShortPiece), ItemDescribe(ND_FiInlet, "Pipe")
]
FilteredWaterPlumbing := [
    "Quantity", "Length", "Item";
    "7", stringit(0 m), ItemDescribe(ND_FiInlet, "Elbow");
    "6", stringit(0 m), ItemDescribe(ND_FiInlet, "Tee");
    "4", stringit(0 m), ItemDescribe(ND_FiInlet, "3" to 1" Reducer");
    "4", stringit(0 m), ItemDescribe(ND_CleanWaterOutlet, "Ball Valve");
    "3", stringit(L_WastePipeNorth), ItemDescribe(ND_CleanWaterOutlet, "Pipe");
    "1", stringit(L_SouthCleanWaterPipeU), ItemDescribe(ND_FiInlet, "Pipe");
    "1", stringit(L_MidCleanWaterPipeU), ItemDescribe(ND_FiInlet, "Pipe");
    "1", stringit(L_NorthCleanWaterPipeU), ItemDescribe(ND_FiInlet, "Pipe");
    "1", stringit(L_SouthPipeToStorage), ItemDescribe(ND_FiInlet, "Pipe");
    "1", stringit(L_NorthPipeToStorage), ItemDescribe(ND_FiInlet, "Pipe");
    "1", stringit(L_CleanWaterPipeL), ItemDescribe(ND_FiInlet, "Pipe");
    "1", stringit(L_SouthCleanWaterPipeL), ItemDescribe(ND_FiInlet, "Pipe");
    "1", stringit(L_FiUpCleanWaterPipe), ItemDescribe(ND_FiInlet, "Pipe");
    "1", stringit(L_FiPerpCleanWaterPipe), ItemDescribe(ND_FiInlet, "Pipe");
    "1", stringit(L_FiDownCleanWaterPipe), ItemDescribe(ND_FiInlet, "Pipe");
    "1", stringit(L_FiIntCleanWaterPipe), ItemDescribe(ND_FiInlet, "Pipe")
]
SystemDrainPlumbing := [
    "Quantity", "Length", "Item";
    "2", stringit(0 m), ItemDescribe(ND_SystemDrain, "Coupling");
    "2", stringit(0 m), ItemDescribe(ND_SystemDrain, "Elbow");
    "1", stringit(L_DrainOutlet), ItemDescribe(ND_SystemDrain, "Pipe");
    "1", stringit(L_DrainChannelPipe), ItemDescribe(ND_SystemDrain, "Pipe")
]
ChemPlatformDrain := [
    "Quantity", "Length", "Item";
    "1", stringit(0 m), ItemDescribe(ND_ChemPlatformDrain, "Coupling");
    "3", stringit(0 m), ItemDescribe(ND_ChemPlatformDrain, "Elbow");
    "1", stringit(L_ChemPlatformDrainPipe), ItemDescribe(ND_ChemPlatformDrain, "Pipe");
    "1", stringit(L_ChemPlatformDrainHoriz), ItemDescribe(ND_ChemPlatformDrain, "Pipe");
    "1", stringit(L_ChemPlatformDrainPerp), ItemDescribe(ND_ChemPlatformDrain, "Pipe");
    "1", stringit(L_ChemDrainDown), ItemDescribe(ND_ChemPlatformDrain, "Pipe")
]
CoagDrain := [
    "Quantity", "Length", "Item";
    "1", stringit(0 m), ItemDescribe(ND_ChemDrains, "Bulkhead Fitting");
    "1", stringit(0 m), ItemDescribe(ND_ChemDrains, "Male Insert");
    "1", stringit(0 m), ItemDescribe(ND_ChemDrains, "BallValve");
    "5", stringit(0 m), ItemDescribe(ND_ChemDrains, "Elbow")
]
CoagPlumbing := □  # error: This placeholder is empty.
ChlorDrain := [
    "Quantity", "Length", "Item";
    "1", stringit(0 m), ItemDescribe(ND_ChemDrains, "Bulkhead Fitting");
    "1", stringit(0 m), ItemDescribe(ND_ChemDrains, "Male Insert");
    "1", stringit(0 m), ItemDescribe(ND_ChemDrains, "BallValve");
    "5", stringit(0 m), ItemDescribe(ND_ChemDrains, "Elbow")
]
ChlorPlumbing := □  # error: This placeholder is empty.
ND_StockMixer := 1.5 in
StockMixers := [
    "Quantity", "Length", "Item";
    "6", stringit(0 m), ItemDescribe(ND_StockMixer, "Elbow");
    "2", stringit(0 m), ItemDescribe(ND_StockMixer, "Tee");
    "2", stringit(0 m), "1.5" to 1/2" reducer";
    "2", stringit(0 m), ItemDescribe(ND_ChemDrains, "Cap");
    "4", stringit(8 in), ItemDescribe(ND_StockMixer, "Pipe");
    "2", stringit(12 in), ItemDescribe(ND_StockMixer, "Pipe")
]
Title := ["AguaClara Low Flow Stacked Rapid Sand Filter", "", ""; "Materials List", "", ""]
Miscellaneous := [
    "Quantity", "Length", "Item";
    "1", stringit(0 m), "ladder";
    "2", stringit(0 m), "55 gallon drum";
    "1", stringit(0 m), "meter stick"
]
msp(Component) := ["", "", ""; Component, "", ""]
# [component: inputs stack(Title, msp("SYSTEM INLET PLUMBING"), SystemInletPlumbing, msp("RAPID MIX PLUMBING"), RapidMixPipes, msp("OVERFLOW DRAIN"), EtOverflowDrain, msp("FILTER INLET PLUMBING"), FilterInletPlumbing, msp("FILTERED WATER PLUMBING"), FilteredWaterPlumbing, msp("SYSTEM DRAIN PLUMBING"), SystemDrainPlumbing, msp("CHEM PLATFORM DRAIN"), ChemPlatformDrain, msp("COAGULANT DRAIN"), CoagDrain, msp("CHLORINE DRAIN"), ChlorDrain, msp("MISCELLANEOUS"), Miscellaneous)]
L_WaterLevelMeasurement :=
    for i ∈ 0 .. last(WaterLevelMeasurement[:, 1]) - 1
        L ← L + str2num(submatrix(WaterLevelMeasurement[:, 1], 1, last(WaterLevelMeasurement[:, 1]), 0, 0)[i])*m*str2num(submatrix(WaterLevelMeasurement[:, 0], 1, last(WaterLevelMeasurement[:, 0]), 0, 0)[i])*m
    L
N_ND(Matrix) :=
    N_NDMatrix ← sort(submatrix(Matrix[:, 2], 1, last(Matrix[:, 2]), 0, 0))
    N ← 1
    if length(N_NDMatrix) > 1
        for j ∈ 1 .. last(Matrix[:, 2]) - 1
            N ← N + (str2num(substr(N_NDMatrix[j], 0, 1)) ≠ str2num(substr(N_NDMatrix[j - 1], 0, 1)))
L_Component(Matrix) :=
    N_NDMatrix ← sort(submatrix(Matrix[:, 2], 1, last(Matrix[:, 2]), 0, 0))
    N ← 1
    if length(N_NDMatrix) > 1
        for j ∈ 1 .. last(Matrix[:, 2]) - 1
            N ← N + (str2num(substr(N_NDMatrix[j], 0, 1)) ≠ str2num(substr(N_NDMatrix[j - 1], 0, 1)))
    L_Matrix ← sort(submatrix(Matrix[:, 1], 1, last(Matrix[:, 1]), 0, 0))
    k ← 0
    j ← 0
    while k < N - 1
        L[k, 0] ← num2str(str2num(L[k, 0]) + str2num(L_Matrix[j]))
        L[k, 1] ← substr(N_NDMatrix, 0, 1)
        j ← j + 1
        k ← k + (N_NDMatrix[j] ≠ N_NDMatrix[j - 1])
    L
i ← 0
while i < N - 1
    a[i] ← □
L_Component(WaterLevelMeasurement) =  # error: This variable is undefined.
for i ∈ 0 .. last(Matrix[:, 1]) - 1
    L ← L + str2num(submatrix(Matrix[:, 1], 1, last(Matrix[:, 1]), 0, 0)[i])*m*str2num(submatrix(Matrix[:, 0], 1, last(Matrix[:, 0]), 0, 0)[i])*m
N_NDMatrix := sort(submatrix(WaterLevelMeasurement[:, 2], 1, last(WaterLevelMeasurement[:, 2]), 0, 0))
N_NDMatrix =  # error
L_Test(WaterLevelMeasurement) =  # error
last(WaterLevelMeasurement[:, 2]) - 1 =  # error
str2num(substr(N_NDMatrix[1], 0, 1)) ≠ str2num(substr(N_NDMatrix[0], 0, 1)) =  # error
length(N_NDMatrix) =  # error
L_Component(Matrix) :=
    for i ∈ 0 .. last(Matrix[:, 1]) - 1
        L ← L + str2num(submatrix(Matrix[:, 1], 1, last(Matrix[:, 1]), 0, 0)[i])*m*str2num(submatrix(Matrix[:, 0], 1, last(Matrix[:, 0]), 0, 0)[i])*m
    L
ElbowRadius(ND_FiInlet) + ShortTeeLength(ND_FiInlet) + 2*ConRadius(ND_FiInlet)
ND_FiInlet = 3 in
ND_FiManTrunk = 2 in
2*ElbowRadius(ND_FiInlet) + 2*SocketDepth(ND_FiInlet) + ShortTeeLength(ND_FiInlet) + ConRadius(ND_FiInlet) = 0.28047 m
ND_FiManBranch = 1.5 in
TeeLength(ND_FiInlet) + ValveLength(ND_FiInlet) + 2*SocketDepth(ND_FiInlet) + ElbowRadius(ND_FiInlet) + ConRadius(ND_FiInlet) = 0.386934 m
ND_FiBwDrain = 2 in
ND_FiSandDrain = 1 in
ND_FiTesterOuter = 1.5 in
L_FiManBranch = [0.0809551; 0.142012; 0.0809551] m
ND_FiTesterInner = 1 in
L_slots = 1.51739 in
ND_FiPipe = 0.3048 m
ND_RMPipe = 4 in
30 min*1.5*L/s = 2700 L
Rs := ¤*1/60
# iron rod
Cost_Iron := 195000*Rs
Cement := 52000*Rs
