# Minor Loss Coefficients
# Individual K Values | Expansions | Contractions
K_El90 := 0.9  # 90 deg elbow
# 45 deg elbow
diamratio_cont0.75 := 0
K_El45 := 0.45
# The loss coefficient for the channel transition in a 90 degree turn
diamratio_exp0.75 := 0
diamratio_cont0.25 := 0
K_90 := 0.4
diamratio_cont0.5 := 0
diamratio_exp0.25 := 0
K_GateValve := 0.39
diamratio_exp0.5 := 0
K_ChkValveConv := 4
K_ChkValveBall := 4.5
K_SlopeExit := 2
K_GlobeValve := 10
K_AngleValve := 4.3
K_Exp := 1  # headloss coefficient of jet
K_Exp0.75 := 0.18
K_Exp0.5 := 0.55
K_Exp0.25 := 0.25
K_Cont0.75 := 0.18
K_Cont0.5 := 0.33
K_Cont0.25 := 0.43
K_RmLfom := 1  # Accounts for the exit into the flocculator from the straight Lfom.
K_RmOrifice := 1.3  # Minor Loss coefficient for the water flowing over the water fall weir, prior to orifice mixing.
K_ReturnBend := 1.5
K_TeeFlowRun := 0.6
K_TeeFlowBr := 1.8
K_FlocBaffle180 := 4
K_LTurn90 := 0.45  # K.lturn is the K value for a long radius ninety degree turn
K_PipeEnt := 0.5  # K.ent is the K value for a pipe entrance
K_PipeExit := 1
K_SedSlopeExit := 1  # Exit coefficient from manifold to sed tank.
K_Sum(N_Elbow45, N_Elbow90, N_TeeRun, N_TeeBr, GateValve, GlobeValve, AngleValve, CheckValveConv, CheckValveBall) :=
    K_2 ← N_Elbow45*K_El45 + N_Elbow90*K_El90
    K_3 ← K_TeeFlowRun*N_TeeRun + K_TeeFlowBr*N_TeeBr
    K_4 ← GateValve*K_GateValve + GlobeValve*K_GlobeValve + AngleValve*K_AngleValve + CheckValveConv*K_ChkValveConv + CheckValveBall*K_ChkValveBall
    K_Sum ← K_2 + K_3 + K_4
    return K_Sum
Pi_VenaContractaOrifice := 0.63
