# AguaClara Design Tool
# [reference: BasicInputs.xmcd]
# [reference: DesignAssumptions.xmcd]
# [reference: MathFunctions.xmcd]
# [reference: PipeDatabase.xmcd]
# [reference: MinorLossCoefficients.xmcd]
# [reference: FluidsFunctions.xmcd]
# [reference: Sedimentation Tank.xmcd]
# [reference: Floc Hopper - New Design.xmcd]
# [reference: FCM.xmcd]
# [reference: Flocculator 3.xmcd]
# [reference: RapidMixer.xmcd]
# [reference: EntranceTankDim.xmcd]
# [reference: Materials List.xmcd]
# [reference: AutoCADMasterProgram.xmcd]
# This file must have at least one variable displayed otherwise it doesn't recalculate and it claims that all variables are undefined.
L_Sed = 3.08571 m
AC_FlocTank = [
    "-layer m floctank";
    "c t 91,91,91";
    "floctank";
    "  ";
    "_-view o t _zoom w 0.16,4.14,0 -3.24571,8.21,1.71922 _box 0,4.3,0 -3.08571,8.05,1.71922 _box 0.15,4.15,-0.15 -3.23571,8.2,1.71922 _subtract 0.15,4.15,-0.15  0,4.3,0 ";
    "_box -3.23571,4.8,0 0.15,4.95,1.71922";
    "_box -0.13327,4.8,0.6876 0,4.95,0";
    "_subtract -3.23571,4.8,0  -0.13327,4.8,0.6876 ";
    "_box -3.23571,5.45,0 0.15,5.6,1.71922";
    "_box -3.08571,5.45,0.6876 -2.95245,5.6,0"
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]
AC_SedTank = [
    "_-view o t"; "-layer m tank"; "c t 132,132,132"; "tank"; "  "; "_-view o t _zoom w 0.16,-0.16,0 -3.24571,2.16,1.5674 _box 0,0,0 -3.08571,2,1.5674 _box 0.15,-0.15,-0.15 -3.23571,2.15,1.5674 _subtract 0.15,-0.15,-0.15  0,0,0 "; "-layer s 0"; "  "; "-layer f tank"; "  "
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]
# [component: inputs AC_SedTank]
# [component: inputs AC_FlocTank]
