# [reference: MasterProgram.xmcd]
# Test Assumptions
# [reference: FluidsFunctions.xmcd]
# Piping Parameters Set Here
# [reference: PipeDatabase.xmcd]
Q_plant := 50*L/s
K_vc := 0.62
a := rows(AvailPipeSizes(4)) = 12
b := cols(AvailPipeSizes(4)) = 2
PipeSpecification := 4
# The code here is used to size the rapid mixer for small flow-rates.  This in conjunction with Entrance Tank code will be used to develop an automated design for the Rapid Mixer and Entrance tank onto AutoCAD code.
AvailPipeSizes(4)[rs, 0]
rs := 0 .. (a - 1)
L_pipe := 2 m
PipeSpec[rs] := AvailPipeSizes(4)[rs, 1]
K_total := 0.8
# For rapid mix we are using pipe specification 4.  This array will be used for all calculations
# This function is imported from FluidsFunctions to calculate pipe size based on flow rate.
ν := 1*10^-6*m^2/s
# This function determines the size of the pipe given a vector and entered values
PipeDiameter(Q_plant, PipeSpec, h_lossmax, L_pipe, ν, eps, K_total) := D_pipe(Q_plant, PipeSpec[rs], h_lossmax, L_pipe, ν, 0, K_total)
40 cm - (HL_Floc + HL_SedWeirInlet + HL_SedWeirExit + HL_SedLaunder) = 8.15026 cm
# Sizing the Macromixing Orifice
# We want a minor loss coefficient of 1.3.  This is an assumption made
.
K_e := 1.3
# So we use the equation for minor loss coefficient for a submerged orifice given in the notes on Flow Control and Measurement to determine d.or
d_macromixorificeFn(K_vc, d_pipe, K_e, PipeSpec) := innerdiameter(d_pipe, PipeSpecification)*(1/(K_vc*(K_e^0.5 + 1)))^0.5
# We are assuming a circular orifice here.  The resulting area of the orifice and velocity through the orifice are given below.
# The resulting head loss through the orifice is given as:
h_emacromixorificeFn(Q_plant, d_pipe, K_e, PipeSpecification) := K_e*(Q_plant/A_circle(innerdiameter(d_pipe, PipeSpecification)))^2/(2*g)
# Using the size of the macro-mixing orifice and the resulting head loss, the user can input constraints for macro-mixing head loss and total head loss desired and this can determine a pipe diameter.
d_pipeFn(Q_plant, PipeSpec, h_total, MacroMHConstraint) :=
    len ← length(PipeSpec)
    boolean ← 0
    count ← 0
    while boolean == 0
        head ← h_emacromixorificeFn(Q_plant, PipeSpec[count], 1.3, PipeSpecification)
        boolean ← 1 if count == len - 1
        boolean ← 1 if head ≤ MacroMHConstraint
        count ← count + 1
    pipe ← PipeSpec[count]
    h_lossmax ← h_total
    pipe ← D_pipe(Q_plant, PipeSpec, h_lossmax, L_pipe, ν, 0, K_total) if PipeSpec[count] < D_pipe(Q_plant, PipeSpec, h_lossmax, L_pipe, ν, 0, K_total)
    pipe
# There are assumptions such as L.pipe, K.total, and NU made here that are constant for the most part.
# Sizing the Micromixing Orifice
# There are two conditions that must be met here.  First of all the energy disspation rate must be 1 W/kg and there must be a total head loss of 40 cm throughout the plant.
h_total := 40 cm - (HL_Floc + HL_SedWeirInlet + HL_SedWeirExit + HL_SedLaunder)
ε := 1*W/kg
h_emicromixorificeFn(h_total, h_emacromixorifice) := h_total - h_emacromixorifice
Wfunction(h_emicromixorifice, ε) := (2*g*h_emicromixorifice)^(3/2)/(20*ε)
# Based on the value determined for the micro-mixer head loss, we can find a diameter for the micro-mixing orifice
d_micromixorificeFn(d_pipe, Q_plant, h_emicromixorifice, PipeSpecification) := (4*(A_circle(innerdiameter(d_pipe, PipeSpecification))/K_vc)/(((2*g*h_emicromixorifice)/(Q_plant/A_circle(d_pipe))^2)^0.5 + 1))^0.5/π^0.5
# The largest smallest dimension is calculated below.
h_emicromixorifice := h_total - h_emacromixorificeFn(Q_plant, d_pipeFn(Q_plant, PipeSpec, h_total, 5 cm), K_e, PipeSpecification) = 6.24363 cm
d_micromixorificeFinal(d_pipe, Q_plant, h_emicromixorifice, PipeSpecification) :=
    ε ← 1*W/kg
    W1 ← Wfunction(h_emicromixorifice, ε)
    d1 ← d_micromixorificeFn(d_pipe, Q_plant, h_emicromixorifice, PipeSpecification)
    orificeNumbers ← 1
    A1 ← A_circle(d1)
    while W1 < d1
        orificeNumbers ← orificeNumbers + 1
        A2 ← (4*A1/(π*orificeNumbers))^0.5
        d1 ← A2
    a[0] ← orificeNumbers
    a[1] ← d1/in
    a
W0 := (2*g*h_emicromixorifice)^(3/2)/(20*ε) = 6.77566 cm
# W is used to check to make sure that our largest smallest dimension meets the limitation
# Orifice Numbers are given by index 0
# Sizes of orifices are given in diameter (in) by index 1
# The function below determines the size combination of pipe inner diameter and orifice diameters using the functions derived above.
SizeCombination1(Q_plant, PipeSpec, h_total, MacroMHConstraint, K_vc, K_e, PipeSpecification) :=
    a[1] ← d_pipeFn(Q_plant, PipeSpec, h_total, MacroMHConstraint)
    a[2] ← d_macromixorificeFn(K_vc, a[1], K_e, PipeSpecification)
    h_emicromixorifice ← 8.15 cm - h_emacromixorificeFn(Q_plant, a[1], K_e, PipeSpecification)
    a[3] ← d_micromixorificeFinal(a[1], Q_plant, h_emicromixorifice, PipeSpecification)[1]*in
    a[0] ← innerdiameter(a[1], PipeSpecification)
    a
# Index 0 gives inner pipe diameter
# Index 1 gives nominal pipe diameter
# Index 2 gives macromixing diameter
# Index 3 gives micromixing diameter
# Example Calculation
i := 1 .. 50
d_micromixorificeFinal(d_pipeFn(Q_plant, PipeSpec, h_total, 5 cm), Q_plant, h_emicromixorifice, PipeSpecification)[0]
Q_p[i] := i*L/s
SizeCombination1(Q_plant, PipeSpec, h_total, 5 cm, K_vc, K_e, 4) = [0.344526; 0.4064; 0.299089; 0.0670541] m
SizeCombination1(2*L/s, PipeSpec, h_total, 1 cm, K_vc, K_e, 4) = [0.139725; 0.1524; 0.121298; 0.0502887] m
InnerPipeDiameters[i] := SizeCombination1(Q_p[i], PipeSpec, h_total, 5 cm, K_vc, K_e, 4)[0]
MacroMODiameters[i] := SizeCombination1(Q_p[i], PipeSpec, h_total, 5 cm, K_vc, K_e, 4)[2]
MacroMHConstraint := 5 cm
MicroMODiameters[i] := SizeCombination1(Q_p[i], PipeSpec, h_total, 5 cm, K_vc, K_e, 4)[3]
MicroMONumberFn(d_pipe, Q_plant, h_emicromixorifice, PipeSpecification) := d_micromixorificeFinal(d_pipe, Q_plant, h_emicromixorifice, PipeSpecification)[0]
MicroMONum[i] := MicroMONumberFn(d_pipeFn(Q_p[i], PipeSpec, h_total, MacroMHConstraint), Q_p[i], h_emicromixorifice, PipeSpecification)
InnerPipeDiameter := innerdiameter(d_pipeFn(Q_plant, PipeSpec, h_total, MacroMHConstraint), PipeSpecification) = 0.344526 m
MacroMODiameter := d_macromixorificeFn(K_vc, d_pipeFn(Q_plant, PipeSpec, h_total, MacroMHConstraint), K_e, PipeSpecification) = 0.299089 m
MicroMODiameter := d_micromixorificeFinal(d_pipeFn(Q_plant, PipeSpec, h_total, MacroMHConstraint), Q_plant, h_emicromixorifice, PipeSpecification)[1] = 2.63991
MicroMONumber := MicroMONumberFn(d_pipeFn(Q_plant, PipeSpec, h_total, MacroMHConstraint), Q_plant, h_emicromixorifice, PipeSpecification) = 11
h_emacro[i] := h_emacromixorificeFn(Q_p[i], d_pipeFn(Q_p[i], PipeSpec, h_total, MacroMHConstraint), K_e, PipeSpecification)
h_emicro[i] := h_total - h_emacromixorificeFn(Q_p[i], d_pipeFn(Q_p[i], PipeSpec, h_total, MacroMHConstraint), K_e, PipeSpecification)
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