# Pipe specifications explained
# About pipe schedules
# Water pipes are run at different thicknesses - usually to handle different pressures. In contrast to the 2" Schedule 40 pipe above, a 2" Schedule 80 pipe has the same OD of 2.375" but a wall thickness of .218". This gives it an inner diameter of 1.939" (2.375" OD - 2 x .218" (the wall thickness)). This means that a 2" Schedule 80 pipe has a smaller ID, less than 2". Why wouldn't they keep the same Inside Diameter (ID) and just make the outside Diameter larger if they needed heavier walls? By keeping the Outside Diameters the same, a 2'' fitting that goes over the OD of the pipe will work for 2" pipe, regardless of the wall thickness.
# About SDRs
# SDR is an abbreviation for "Standard Dimension Ratio". It is a convenient means for defining the minimum wall thickness for Pipe (not Tube). It is equal to the Actual Pipe Diameter (not the nominal pipe size) divided by the wall thickness. For example 2" pipe, which has an actual OD of 2.375" with a wall thickness of .091", would have an SDR value of 2.375" / .091" or an SDR of 26. In the reverse, by knowing the pipe size and SDR number, you can calculate the minimum wall thickness. For example 3" SDR 21 pipe which has an actual OD of 3.500" would have a minimum wall thickness equal to 3.500" / 21 or .165". It is important to note the wall calculated is the minimum wall thickness.
# Referece: <http://availableplastics.com/pvc_pipe_tube_nominclature.html> 02/11/08.
# Pipe specs for AguaClara plants
# Pressure rating is not a concern for most pipes in the AguaClara plant because there is never more than a few meters of pressure head in any part of the plant. The general durability of the pipe is of more concern, as pipes with very thin walls break or deform easily. Because large-diameter pipes have thicker walls, we can use thin-walled specifications to lower costs and still maintain sufficient durability. Follow the following general guidelines for permanent pipes in the AguaClara plants:
#
# 1/2" : SDR 13.5
# 3/4" : SDR 17
# 1" - 4" : SDR 26
# 6" - 12" : SDR 41
# Exceptions include the slotted pipes of the filter manifold (use schedule 40) and the trunks of the filter manifold (use SDR 26 even though they are 4"-8").
# Pipe spec indecies
Sch10 := 0
Sch30 := 1
Sch40 := 2
Sch80 := 3
Sch120 := 4
Sch160 := 5
SDR_13.5 := 6
SDR_17 := 7
SDR_21 := 8
SDR_26 := 9
SDR_32.5 := 10
SDR_41 := 11
SDR_64 := 12
PSToString(PS) :=
    Local ← "Sch 10" if PS == Sch10
    Local ← "Sch 30" if PS == Sch30
    Local ← "Sch 40" if PS == Sch40
    Local ← "Sch 80" if PS == Sch80
    Local ← "Sch 120" if PS == Sch120
    Local ← "Sch 160" if PS == Sch160
    Local ← "SDR 13.5" if PS == SDR_13.5
    Local ← "SDR 17" if PS == SDR_17
    Local ← "SDR 21" if PS == SDR_21
    Local ← "SDR 26" if PS == SDR_26
    Local ← "SDR 32.5" if PS == SDR_32.5
    Local ← "SDR 41" if PS == SDR_41
    Local ← "SDR 64" if PS == SDR_64
    return Local
PS_Decision(ND) :=
    SDR_26 if ND ≤ 4 in
    SDR_41 otherwise
# Straight pipes database
# Available pipe sizes with corresponding OD's based on country
# Nominal Pipe Size  Actual Outer Diameter
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Pipesizes := [
    1/8*in, .405 in;
    1/4*in, .540 in;
    3/8*in, .675 in;
    1/2*in, .840 in;
    3/4*in, 1.050 in;
    1 in, 1.315 in;
    1.25 in, 1.66 in;
    1.5 in, 1.9 in;
    2 in, 2.375 in;
    2.5 in, 2.875 in;
    3 in, 3.5 in;
    3.5 in, 4 in;
    4 in, 4.5 in;
    5 in, 5.563 in;
    6 in, 6.625 in;
    8 in, 8.625 in;
    10 in, 10.75 in;
    12 in, 12.75 in;
    14 in, 14 in;
    15 in, 15 in;
    16 in, 16 in;
    18 in, 18 in;
    20 in, 20 in;
    24 in, 24 in
]
CountryPipes := [
    1, 0;
    1, 0;
    1, 0;
    1, 1;
    1, 1;
    1, 1;
    0, 0;
    1, 1;
    1, 1;
    0, 0;
    1, 1;
    0, 0;
    1, 1;
    0, 0;
    1, 1;
    1, 1;
    1, 0;
    1, 1;
    0, 0;
    1, 0;
    0, 1;
    1, 0;
    1, 1;
    1, 1
]
UsingPipes := CountryPipes[:, Country]
AvailND :=
    i ← 0
    j ← 0
    while i ≤ last(Pipesizes[:, 0]) and j ≤ last(Pipesizes[:, 0])
        if UsingPipes[j] ≠ 0
            ND[i] ← Pipesizes[:, 0][j]
            i ← i + 1
        j ← j + 1
    ND
AvailOD :=
    i ← 0
    j ← 0
    while i ≤ last(Pipesizes[:, 0]) and j ≤ last(Pipesizes[:, 0])
        if UsingPipes[j] ≠ 0
            OD[i] ← Pipesizes[:, 1][j]
            i ← i + 1
        j ← j + 1
    OD
# updated wall thicknesses for SDR 26 pipes to get the ID's reported from Mexichem Honduras on 15", 18", and 24"  13may2015 abh35
# Assumption: A pipe can have a minwallthick less
# than 0.049 in. Where this is not violated gaps were
# filled in using minwallthickness=actual outer diameter / SDR
# References
# http://www.harvel.com/tech-specs-pvc-pipe-sdr.asp
# http://availableplastics.com/pvc_pipe_dimensions.html
# Minimum wall thicknesses
T_WallMinSch10 := [.049; .065; .065; .083; .083; .109; .109; .109; .109; .12; .12; 0; .12; .134; .134; .148; .165; .18; .25; 0; .25; .25; .25; .25]*in
T_WallMinSch30 := [.057; .073; .073; .095; .095; .114; .117; .125; 0; 0; 0; 0; 0; 0; 0; .277; .307; .330; .375; 0; .375; .437; .5; .562]*in
T_WallMinSch40 := [.068; .088; .091; .109; .113; .133; .14; .145; .154; .203; .216; 0; .237; .258; .28; .322; .365; .406; .437; 0; .5; .562; .593; .687]*in
T_WallMinSch80 := [.095; .119; .126; .147; .154; .179; .191; .2; .218; .276; .3; 0; .337; .375; .432; .5; .5; .687; .75; 0; .843; .937; 1.031; 1.218]*in
T_WallMinSch120 := [0; 0; 0; .170; .170; .2; .215; .2258; .25; .3; .35; 0; .437; .5; .562; .718; .843; 1; 1.093; 0; 1.218; 1.375; 1.5; 1.812]*in
T_WallMinSch160 := [0; 0; 0; .188; .219; .25; .25; .281; .344; .375; .438; 0; .531; .625; .719; .906; 1.125; 1.312; 1.406; 0; 1.593; 1.781; 1.968; 2.343]*in
T_WallMinSDR13.5 := [
    0;
    0;
    0;
    .675/13.5;
    .840/13.5;
    1.050/13.5;
    1.315/13.5;
    1.66/13.5;
    0;
    0;
    0;
    0;
    0;
    0;
    0;
    0;
    0;
    0;
    0;
    0;
    0;
    0;
    0;
    0
]*in
T_WallMinSDR17 := [
    0;
    0;
    0;
    0;
    0.072;
    0.087;
    0.108;
    0.122;
    0.150;
    0.179;
    0.219;
    0.249;
    0.281;
    0.347;
    0.414;
    0.539;
    0.670;
    0.795;
    14/17;
    15/17;
    16/17;
    18/17;
    20/17;
    24/17
]*in
T_WallMinSDR21 := [
    0;
    0;
    0;
    0;
    0.07;
    0.073;
    0.089;
    0.100;
    0.123;
    0.147;
    0.177;
    0.202;
    0.227;
    0.281;
    0.335;
    0.435;
    0.542;
    0.643;
    14/21;
    15/21;
    16/21;
    18/21;
    20/21;
    24/21
]*in
T_WallMinSDR26 := [0; 0; 0; 0; 0; 0.07; 0.074; 0.083; 0.101; 0.120; 0.145; 0.164; 0.183; 0.228; 0.271; 0.352; 0.438; 0.520; 0; 0.331; 0; 0.18; 0; 0.266]*in
T_WallMinSDR32.5 := [
    0;
    0;
    0;
    0;
    0;
    0;
    0.07;
    0.07;
    0.083;
    0.098;
    0.118;
    0.133;
    0.148;
    0.182;
    0.216;
    0.281;
    0.351;
    0.416;
    14/32.5;
    15/32.5;
    16/32.5;
    18/32.5;
    20/32.5;
    24/32.5
]*in
T_WallMinSDR41 := [
    0;
    0;
    0;
    0;
    0;
    0;
    0;
    0;
    2.375/41;
    2.875/41;
    0.095;
    0.108;
    0.120;
    0.146;
    0.172;
    0.223;
    0.278;
    0.330;
    14/41;
    15/41;
    16/41;
    0.439;
    0.488;
    0.585
]*in
T_WallMinSDR64 := [
    0;
    0;
    0;
    0;
    0;
    0;
    0;
    0;
    0;
    0;
    0;
    0;
    4.5/64;
    5.563/64;
    6.625/64;
    8.625/64;
    10.75/64;
    12.75/64;
    0;
    0;
    0;
    0;
    0;
    0
]*in
T_WallMin := augment(T_WallMinSch10, T_WallMinSch30, T_WallMinSch40, T_WallMinSch80, T_WallMinSch120, T_WallMinSch160, T_WallMinSDR13.5, T_WallMinSDR17, T_WallMinSDR21, T_WallMinSDR26, T_WallMinSDR32.5, T_WallMinSDR41, T_WallMinSDR64)
# Average inner diameter data
# Where available data for average inner diameter will preferentially be used instead of minimum wall thickness. In general this should give a more conservative (smaller) estimate for inner diameter for sizing pipes.
ID_AveSch10 := [0; 0; 0; 0; 0; 0; 0; 0; 0; 0; 0; 0; 0; 0; 0; 0; 0; 0; 0; 0; 0; 0; 0; 0]*in
ID_AveSch30 := [0; 0; 0; 0; 0; 0; 0; 0; 0; 0; 0; 0; 0; 0; 0; 0; 0; 0; 0; 0; 0; 0; 0; 0]*in
ID_AveSch40 := [0; 0; 0; 0; 0; 0; 0; 0; 0; 0; 0; 0; 0; 0; 0; 0; 0; 0; 0; 0; 0; 0; 0; 0]*in
ID_AveSch80 := [0; 0; 0; 0; 0; 0; 0; 0; 0; 0; 0; 0; 0; 0; 0; 0; 0; 0; 0; 0; 0; 0; 0; 0]*in
ID_AveSch120 := [0; 0; 0; 0; 0; 0; 0; 0; 0; 0; 0; 0; 0; 0; 0; 0; 0; 0; 0; 0; 0; 0; 0; 0]*in
ID_AveSch160 := [0; 0; 0; 0; 0; 0; 0; 0; 0; 0; 0; 0; 0; 0; 0; 0; 0; 0; 0; 0; 0; 0; 0; 0]*in
ID_AveSDR13.5 := [0; 0; 0; 0; 0; 0; 0; 0; 0; 0; 0; 0; 0; 0; 0; 0; 0; 0; 0; 0; 0; 0; 0; 0]*in
ID_AveSDR17 := [0; 0; 0; 0; 0; 0; 0; 0; 0; 0; 0; 0; 0; 0; 0; 0; 0; 0; 0; 0; 0; 0; 0; 0]*in
ID_AveSDR21 := [0; 0; 0; 0; 0.91; 1.169; 1.482; 1.7; 2.129; 2.581; 3.146; 3.597; 4.046; 5.001; 5.955; 7.756; 0; 0; 0; 0; 0; 0; 0; 0]*in
ID_AveSDR26 := [0; 0; 0; 0; 0; 1.175; 1.512; 1.734; 2.173; 2.635; 3.210; 3.672; 4.134; 5.108; 6.084; 7.921; 9.874; 11.711; 12.860; 14.338; 14.696; 17.639; 18.370; 23.469]*in
ID_AveSDR32.5 := [0; 0; 0; 0; 0; 1.169; 1.482; 1.7; 2.129; 2.581; 3.146; 3.597; 4.046; 5.001; 5.955; 7.756; 0; 0; 0; 0; 0; 0; 0; 0]*in
ID_AveSDR41 := [0; 0; 0; 0; 0; 0; 0; 0; 0; 0; 0; 0; 0; 0; 0; 0; 0; 0; 0; 0; 0; 17.061; 18.956; 22.748]*in
ID_AveSDR64 := [0; 0; 0; 0; 0; 0; 0; 0; 0; 0; 0; 0; 0; 0; 0; 0; 0; 0; 0; 0; 0; 0; 0; 0]*in
ID_Average := augment(ID_AveSch10, ID_AveSch30, ID_AveSch40, ID_AveSch80, ID_AveSch120, ID_AveSch160, ID_AveSDR13.5, ID_AveSDR17, ID_AveSDR21, ID_AveSDR26, ID_AveSDR32.5, ID_AveSDR41, ID_AveSDR64)
# Straight pipe functions
# Actual inner diameter of a pipe
ID(ND, Spec) :=
    OD ← Pipesizes[index(ND, Pipesizes[:, 0]), 1]
    T_Wall ← T_WallMin[index(ND, Pipesizes[:, 0]), Spec]
    ID_Wall ←
        OD - 2*T_Wall if T_Wall ≠ 0
        0 otherwise
    ID_Ave ← ID_Average[index(ND, Pipesizes[:, 0]), Spec]
    ID ←
        ID_Ave if ID_Ave ≠ 0
        ID_Wall otherwise
    return
        "NA" if UsingPipes[index(ND, Pipesizes[:, 0])] == 0 or ID == 0
        ID otherwise
# ID(ND, Spec)
# 1. Calculate ID based on outer diameter and min wall thickness data to be used if average ID data is not available.
# 2. Use average inner diameter data if available.
# 3. Return "NA" if the pipe size is not in use or if no data is available.
# 4. Otherwise return the ID.
IR(ND, Spec) := ID(ND, Spec)/2  # Inner radius
OD(ND) :=
    return Pipesizes[index(ND, Pipesizes[:, 0]), 1] if UsingPipes[index(ND, Pipesizes[:, 0])] ≠ 0
    return 0 otherwise  # Outer diameter
OR(ND) := OD(ND)/2  # Outer radius
T_Pipe(ND, Spec) := OR(ND) - IR(ND, Spec)  # Wall thickness
ID_Index(Index, Spec) :=
    ND ← Pipesizes[Index, 0]
    InnerD ← ID(ND, Spec)
    return InnerD
AvailID(Spec) :=
    j ← 0
    for i ∈ 0 .. last(Pipesizes[:, 0])
        if UsingPipes[i] == 1 and ID(Pipesizes[i, 0], Spec) ≠ "NA"
            InnerD[j] ← ID(Pipesizes[i, 0], Spec)
            j ← j + 1
    return InnerD
findindexID(NominalPipeSize, PipeSpecification) :=
    ID ← innerdiameter(NominalPipeSize, PipeSpecification)
    i ← 0
    innerDs ← AvailPipeSizes(PipeSpecification)[:, 0]
    while innerDs[i] < ID
        i ← i + 1
    return i
ND(InnerD, Spec) :=
    for i ∈ 0 .. last(Pipesizes[:, 0])
        Index ← i if ID(Pipesizes[i, 0], Spec) == InnerD
    return Pipesizes[Index, 0]  # Given the exact ID and pipe spec returns the correspond nominal diameter
ND_Min(ID_Min, Spec) :=
    i ← 0
    while AvailID(Spec)[i] < ID_Min
        i ← i + 1
        break if i == last(AvailID(Spec))
    return ND(AvailID(Spec)[i], Spec)
# Given minimum ID of a pipe it returns the nominal pipe size
A_circle(D) := π*D^2/4
A_pipes(Spec) :=
    innerD ← AvailID(Spec)
    for i ∈ 0 .. last(innerD)
        A[i] ← A_circle(innerD[i])
    return A
# Fittings
# Calculations of regressed pipe fitting dimensions: | Notes: Calculations for 0.5in Tee and Elbow
# Elbow Radius Equation
# estimate as y = 1.5*ND
SocketDepth_Actual := 2 cm
# Tee Length Equation
TeeLength_Actual := 2.5 in
# estimate as y = 0.718*ND
ShortTeeLength_Actual := (TeeLength_Actual - (SocketDepth_Actual*2))/2 = 1.175 cm
# Socket Depth Equation
# estimate as y = 0.2*ND
# http://www.spearsmfg.com/prod_dimensions_spec/40-4-0511_0511_web.pdf
# for wye dimensions
# Cap Diameter Equation
SocketDepth_NoOverlap := 1.7 cm
# estimate as y = 1.04*ND
# http://www.lascofittings.com/products/catalog/PDF/Tech80.pdf
ShortTeeLength_NoOverlap := (TeeLength_Actual - (SocketDepth_NoOverlap*2))/2 = 1.475 cm
# Cap Height Equation | for coupling lengths (assumes sched 80)
# estimate as y = 0.49*ND
# Male Adapter Lengths Equation
ElbowLength_Actual := 1.25 in
# estimate as y = 0.7*ND
ElbowRadius_Actual := ElbowLength_Actual - SocketDepth_Actual = 1.175 cm
# Coupling Lengths Equation
ElbowRadius_NoOverlap := ElbowLength_Actual - SocketDepth_NoOverlap = 1.475 cm
# estimate as y = 0.8*ND
SocketDepthData := [
    0 in;
    0 in;
    0 in;
    1.70 cm;
    0.2*3/4*in;
    27 mm;
    0.2*5/4*in;
    32 mm;
    46 mm;
    46 mm;
    46 mm;
    0.2*5/4*in;
    2.031 in;
    3 in;
    3.031 in;
    4 in;
    5.25 in;
    6.25 in;
    7 in;
    0.2*15*in;
    8 in;
    9 in;
    10 in;
    12 in
]
CapDiameterData := [
    0 in;
    0 in;
    7/8*in;
    (1 + 3/32)*in;
    (1 + 5/16)*in;
    (1 + 9/16)*in;
    (1 + 31/32)*in;
    (2 + 1/4)*in;
    (2 + 22/32)*in;
    (3 + 5/16)*in;
    4 in;
    1.04*7/2*in;
    (5 + 1/16)*in;
    (6 + 5/32)*in;
    (7 + 1/4)*in;
    (9 + 5/16)*in;
    (11 + 13/16)*in;
    (13 + 7/8)*in;
    15 in;
    1.07*15*in;
    (17 + 1/16)*in;
    (19 + 1/16)*in;
    (21 + 3/16)*in;
    (25 + 5/16)*in
]
CapHeightData := [
    0 in;
    0 in;
    1 in;
    (1 + 1/32)*in;
    (1 + 5/16)*in;
    (1 + 9/16)*in;
    (1 + 3/4)*in;
    (1 + 7/8)*in;
    (2 + 1/32)*in;
    (2 + 9/16)*in;
    (2 + 29/32)*in;
    0.49*7/2*in;
    (3 + 1/8)*in;
    (4 + 1/2)*in;
    5 in;
    (6 + 3/8)*in;
    (5 + 1/4)*in;
    (6 + 7/8)*in;
    (7 + 3/8)*in;
    0.49*15*in;
    9 in;
    9 in;
    (12 + 1/4)*in;
    14.125 in
]
ElbowRadiusData := [
    0 in;
    0 in;
    3/8*in;
    1.25 in - 1.70 cm;
    9/16*in;
    11/16*in;
    31/32*in;
    (1 + 1/16)*in;
    (1 + 15/16)*in;
    9.68*3.5*in;
    (1 + 27/32)*in;
    .6*3.5*in;
    (2 + 13/32)*in;
    .6*5*in;
    (3 + 17/32)*in;
    (4 + 17/16)*in;
    (9 + 1/2)*in;
    (10 + 1/2)*in;
    (12 + 1/4)*in;
    .88*15*in;
    (14 + 1/8)*in;
    (17 + 1/4)*in;
    (18 + 3/4)*in;
    (22 + 1/4)*in
]
ShortTeeLengthData := [
    0 in;
    0 in;
    0 in;
    1.475 cm;
    (1 + 1/8)*in;
    1.5 in;
    0.718*5/4*in;
    2.25 in;
    2.5 in;
    3 in;
    (3 + 3/8)*in;
    0.718*3.5*in;
    (4 + 1/8)*in;
    127 mm;
    7.25 in;
    9 in;
    (5 + 13/16)*2*in;
    (6 + 27/32)*2*in;
    (7 + 1/32)*2*in;
    15*1.875*in;
    30 in;
    (15 + 7/8)*2*in;
    18.25*2*in;
    21.125*2*in
]
LongWyeLengthData := [
    0 in;
    0 in;
    0 in;
    (1 + 7/16)*in;
    (1 + 11/16)*in;
    (2 + 3/32)*in;
    (2 + 5/8)*in;
    (2 + 17/16)*in;
    (3 + 26/32)*in;
    5.75 in;
    (4 + 15/16)*in;
    0 in;
    (6 + 7/32)*in;
    13.125 in;
    (9 + 6/16)*in;
    (13 + 9/32)*in;
    (16 + 15/32)*in;
    (18 + 29/32)*in;
    (28 + 6/16)*in;
    0 in;
    33.25 in;
    (36 + 14/16)*in;
    (41 + 12/16)*in;
    46 in
]
CouplingLengthData := [
    0 in;
    1.325 in;
    1.5938 in;
    1.8438 in;
    2.0938 in;
    2.3438 in;
    2.5938 in;
    2.8438 in;
    3.65 in;
    3.6875 in;
    3.9375 in;
    0.8*7/2*in;
    4.79 in;
    (6 + 9/32)*in;
    6.41 in;
    8.40 in;
    10.55 in;
    12.54 in;
    17.75 in;
    1.25*15*in;
    20.25 in;
    22.75 in;
    25.25 in;
    30.25 in
]
ShortWyeLengthData := [
    0 in;
    0 in;
    0 in;
    .25 in;
    5/16*in;
    9/32*in;
    3/8*in;
    .5 in;
    19/32*in;
    1 in;
    7/8*in;
    0 in;
    (1 + 7/32)*in;
    (3 + 3/4)*in;
    (1 + 5/16)*in;
    (1 + 15/16)*in;
    2.5 in;
    (2 + 11/16)*in;
    (7 + 3/16)*in;
    0 in;
    8.75 in;
    (9 + 7/16)*in;
    (11 + 7/16)*in;
    11 in
]
DiagWyeLengthData := [
    0 in;
    0 in;
    0 in;
    (1 + 3/16)*in;
    (1 + 3/8)*in;
    (1 + 13/16)*in;
    2.25 in;
    (2 + 19/32)*in;
    (3 + 7/32)*in;
    5.25 in;
    (4 + 9/16)*in;
    0 in;
    (5 + 23/32)*in;
    (9 + 3/8)*in;
    (8 + 21/32)*in;
    (11 + 11/32)*in;
    (16 + 7/8)*in;
    (16 + 1/8)*in;
    (21 + 3/16)*in;
    0 in;
    24.75 in;
    (27 + 7/16)*in;
    (30 + 5/16)*in;
    35 in
]
MaleAdapterLengthData := [
    0 in;
    0 in;
    0 in;
    (1 + 23/32)*in;
    (1 + 5/8)*in;
    (2 + 3/16)*in;
    (2 + 17/32)*in;
    (2 + 9/16)*in;
    (2 + 11/16)*in;
    (3 + 7/8)*in;
    (3 + 15/16)*in;
    0.7*3.5*in;
    (4 + 3/32)*in;
    (5 + 3/16)*in;
    (5 + 27/32)*in;
    (7 + 1/8)*in;
    (10 + 3/8)*in;
    (11 + 1/8)*in;
    0.9*14*in;
    0.9*15*in;
    0.9*16*in;
    0.9*18*in;
    0.9*20*in;
    0.9*24*in
]
ElbowRadius(ND) := ElbowRadiusData[index(ND, Pipesizes[:, 0])]
ShortTeeLength(ND) := ShortTeeLengthData[index(ND, Pipesizes[:, 0])]
TeeLength(ND) := 2*ShortTeeLength(ND)
SocketDepth(ND) := SocketDepthData[index(ND, Pipesizes[:, 0])]
CrossLength(ND) := 2*ShortTeeLength(ND)
OD_Fitting(ND) := CapDiameterData[index(ND, Pipesizes[:, 0])]
OR_Fitting(ND) := 0.5*CapDiameterData[index(ND, Pipesizes[:, 0])]
CapHeight(ND) := CapHeightData[index(ND, Pipesizes[:, 0])]
CapThickness(ND) := OR_Fitting(ND) - OR(ND)
MaleAdapterLength(ND) := MaleAdapterLengthData[index(ND, Pipesizes[:, 0])]
CouplingLength(ND) := CouplingLengthData[index(ND, Pipesizes[:, 0])]
ShortWyeLength(ND) := ShortWyeLengthData[index(ND, Pipesizes[:, 0])]
LongWyeLength(ND) := LongWyeLengthData[index(ND, Pipesizes[:, 0])]
DiagWyeLength(ND) := DiagWyeLengthData[index(ND, Pipesizes[:, 0])]
UnionLength(ND) := CouplingLength(ND)
# these need to be replaced with real values soon
UnionSocketDepth(ND) := UnionLength(ND)/3
ScaleYN := 0
EN_Scale :=
    1 if ScaleYN == 0
    2.54 otherwise
ValveLength(ND) := 0.1399/0.1143*OD(ND)  # based on library butterfly valve dimensions
ValveSocket(ND) := .1383/1.1600*OD(ND)
BushingLength(ND) := 0.55/.25*OD(ND)
BushingSocket(ND) := 0.05/.25*OD(ND)
ChkValveLength(ND) := 0.0629/0.0169*OR(ND)
ChkValveSocket(ND) := 0.0132/0.0169*OR(ND)
ChkValveDwg := ["CheckValve.dwg"; 0.0169 m*EN_Scale]
GateValveLength(ND) := 0.0364/0.0147*OR(ND)
GateValveSocket(ND) := 0.0035/0.0147*OR(ND)
GateValveDwg := ["VAL-Scaled-Gate-Valve-Threaded.dwg"; 0.0147 m*EN_Scale]
BulkheadLength(ND) := OR(ND)*0.1641 m/(0.0650 m)
BulkheadSocketDepth(ND) := OR(ND)*0.0149 m/(0.0650 m)
BulkheadDwg := ["bulkheadfitting.dwg"; 0.0650 m*EN_Scale]
BulkheadSocketOuterD(ND) := OR(ND)*0.0746 m/(0.0650 m)
BulkheadThreadLength(ND) := OR(ND)*0.1432 m/(0.0650 m)
FloatValveDwg := ["FloatValveMay.dwg"; 0.2500 m*EN_Scale]
BallValveDwg := ["BallValve.dwg"; (0.0452 m/1.35)*EN_Scale]
BallValveLength(ND) := 0.1103*1.35/0.0452*OR(ND)
BallValveSocket(ND) := 0.0314*1.35/0.0452*OR(ND)
BarbDwg := ["Barb.dwg"; 0.4552 m*EN_Scale]
BarbThreadLength(ID) := 0.3771*ID/0.4552
TBarbBLength(ND_Barb) := max(2*ND_Barb, 1 cm)  # threaded barb thread length
BarbLength(ID) := 1.0171*ID/0.4552
TBarbTLength(ND_Thread) := SocketDepth(ND_Thread)  # threaded barb barb length
ODBarbThread(ID) := 0.5126*ID/0.4552
TBarbLength(ND_Thread, ND_Barb) := TBarbBLength(ND_Barb) + TBarbTLength(ND_Thread) + OR_Fitting(ND_Thread) - OR(ND_Thread)  # threaded barb length
# Flexible tubing database
# Inner
# Diameter
# Outer Diameter
# Inner
# Diameter
# Outer Diameter
# These values are those given for Clear FEP tubing on the McMaster-Carr website.
# http://www.mcmaster.com/#standard-fep-tubing/=p805cm
FlexibleTubingMetric := [2, 4; 4, 6; 6, 8; 8, 10; 10, 12; 12, 14; 14, 16]*mm
FlexibleTubingEng := [
    1/16, 1/8;
    3/32, 5/32;
    1/8, 1/4;
    3/16, 1/4;
    1/4, 3/8;
    5/16, 3/8;
    3/8, 1/2;
    7/16, 1/2;
    1/2, 5/8;
    5/18, 3/4;
    3/4, 7/8;
    1, 9/8
]*in
# Fernco rubber fittings
# Uncut
# Length
# ND | ID | OD
FerncoCouplingDimensions := [
    1, 1.32, 1.72, 2.38;
    1.5, 1.94, 2.43, 3.43;
    2, 2.41, 2.9, 3.45;
    3, 3.46, 4.25, 3.98;
    4, 4.58, 5.22, 4.02;
    5, 5.52, 6.16, 3.97;
    6, 6.6, 7.32, 5.74;
    8, 8.64, 9.03, 6.04;
    10, 10.63, 11.77, 5.89;
    12, 12.52, 13.54, 6.32;
    15, 15.4, 16.49, 10
]*in
FerncoInnerDiameter(ND) := FerncoCouplingDimensions[index(ND, FerncoCouplingDimensions[:, 0]), 1]
FerncoOuterDiameter(ND) := FerncoCouplingDimensions[index(ND, FerncoCouplingDimensions[:, 0]), 2]
FerncoCouplingLength(ND) := FerncoCouplingDimensions[index(ND, FerncoCouplingDimensions[:, 0]), 3]
# Reducer dimensions
# ND_in | ND_out | ReducerLength
# 10 to 4 inch AND 8 inch to 4 inch reducers added by mrf222 7/10/14
# http://63.156.201.113/003%20PVC%20White%20Schedule%2040%20Fittings,%20Unions,%20Saddles.pdf
ReducerDimensions := [
    .75 in, .5 in, 3/32*in;
    1 in, .5 in, 13/32*in;
    1 in, .75 in, 3/16*in;
    1.25 in, 1 in, 5/16*in;
    1.5 in, 1 in, 5/16*in;
    1.5 in, 1.25 in, 5/32*in;
    2 in, .5 in, 11/16*in;
    2 in, 1.5 in, 1/8*in;
    3 in, 2 in, 21/32*in;
    4 in, 2 in, 25/16*in;
    4 in, 3 in, 15/32*in;
    6 in, 4 in, 41/32*in;
    8 in, 4 in, 75/32*in;
    8 in, 6 in, 43/32*in;
    10 in, 4 in, 107/32*in
]
ReducerLength(ND_in, ND_out) :=
    L_Reducer ← 0 in
    done ← 0
    i ← 0
    while i < rows(ReducerDimensions) and done == 0
        if ND_in == ReducerDimensions[:, 0][i] and ND_out == ReducerDimensions[:, 1][i]
            L_Reducer ← ReducerDimensions[:, 2][i]
            done ← 1
        i ← i + 1 otherwise
    return L_Reducer
