# Pipe Specifications Explained
# About Pipe Schedules
# Water pipes are run at different thicknesses - usually to handle different pressures. In contrast to the 2" Schedule 40 pipe above, a 2" Schedule 80 pipe has the same OD of 2.375" but a wall thickness of .218". This gives it an inner diameter of 1.939" (2.375" OD - 2 x .218" (the wall thickness)). This means that a 2" Schedule 80 pipe has a smaller ID, less than 2". Why wouldn't they keep the same Inside Diameter (ID) and just make the outside Diameter larger if they needed heavier walls? By keeping the Outside Diameters the same, a 2'' fitting that goes over the OD of the pipe will work for 2" pipe, regardless of the wall thickness.
# About SDRs
# SDR is an abbreviation for "Standard Dimension Ratio". It is a convenient means for defining the minimum wall thickness for Pipe (not Tube). It is equal to the Actual Pipe Diameter (not the nominal pipe size) divided by the wall thickness. For example 2" pipe, which has an actual OD of 2.375" with a wall thickness of .091", would have an SDR value of 2.375" / .091" or an SDR of 26. In the reverse, by knowing the pipe size and SDR number, you can calculate the minimum wall thickness. For example 3" SDR 21 pipe which has an actual OD of 3.500" would have a minimum wall thickness equal to 3.500" / 21 or .165". It is important to note the wall calculated is the minimum wall thickness.
# Referece: <http://availableplastics.com/pvc_pipe_tube_nominclature.html> 02/11/08.
# Assigning Indecies
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# The variable PipeSpecification is chosen in
# the Master Program. When input to the
# pipe database PipeSpecification will act as
# the index you need to select the right
# minimum wall thickness.
# Straight Pipes Database
# Nominal Pipe Size  Actual Outer Diameter
# in all functions
# prevent inclusion of pipes that are not being used
# Some of the inner diameters of the pipes are not the same as produced by the script function above, especially for the smaller pipes because making a wall that thin is not practical. Later perhaps we could include a check, that if the wall thickness based on the Avg Inner D. here is greater than one used we can use this ID. Do not have data for all choices.
# Assumption: A pipe can have a minwallthick less
# than 0.049 in. Where this is not violated gaps were
# filled in using minwallthickness=actual outer diameter / SDR
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Pipesizes := [
    1/8*in, .405 in;
    1/4*in, .540 in;
    3/8*in, .675 in;
    1/2*in, .840 in;
    3/4*in, 1.050 in;
    1 in, 1.315 in;
    1.25 in, 1.66 in;
    1.5 in, 1.9 in;
    2 in, 2.375 in;
    2.5 in, 2.875 in;
    3 in, 3.5 in;
    3.5 in, 4 in;
    4 in, 4.5 in;
    5 in, 5.563 in;
    6 in, 6.625 in;
    8 in, 8.625 in;
    10 in, 10.75 in;
    12 in, 12.75 in;
    14 in, 14 in;
    16 in, 16 in;
    18 in, 18 in;
    20 in, 20 in;
    24 in, 24 in
]
UsingPipes := [0; 0; 0; 1; 1; 1; 0; 1; 1; 0; 1; 0; 1; 0; 1; 1; 0; 1; 0; 1; 0; 1; 1]
AvgInnerDiameter := [
    0, 0, 0, 0, 0, 0, 0, 0, 0, 0, 0;
    0, 0, 0, 0, 0, 0, 0, 0, 0, 0, 0;
    0, 0, 0, 0, 0, 0, 0, 0, 0, 0, 0;
    0, 0, 0, 0, 0, 0, 0, 0, 0, 0, 0;
    0, 0, 0, 0, 0, 0, 0, 0.91, 0, 0, 0;
    0, 0, 0, 0, 0, 0, 0, 1.169, 1.175, 1.169, 0;
    0, 0, 0, 0, 0, 0, 0, 1.482, 1.512, 1.482, 0;
    0, 0, 0, 0, 0, 0, 0, 1.7, 1.734, 1.7, 0;
    0, 0, 0, 0, 0, 0, 0, 2.129, 2.173, 2.129, 0;
    0, 0, 0, 0, 0, 0, 0, 2.581, 2.635, 2.581, 0;
    0, 0, 0, 0, 0, 0, 0, 3.146, 3.210, 3.146, 0;
    0, 0, 0, 0, 0, 0, 0, 3.597, 3.672, 3.597, 0;
    0, 0, 0, 0, 0, 0, 0, 4.046, 4.134, 4.046, 0;
    0, 0, 0, 0, 0, 0, 0, 5.001, 5.108, 5.001, 0;
    0, 0, 0, 0, 0, 0, 0, 5.955, 6.084, 5.955, 0;
    0, 0, 0, 0, 0, 0, 0, 7.756, 7.921, 7.756, 0;
    0, 0, 0, 0, 0, 0, 0, 0, 9.874, 0, 0;
    0, 0, 0, 0, 0, 0, 0, 0, 11.711, 0, 0;
    0, 0, 0, 0, 0, 0, 0, 0, 12.860, 0, 0;
    0, 0, 0, 0, 0, 0, 0, 0, 14.696, 0, 0;
    0, 0, 0, 0, 0, 0, 0, 0, 16.533, 0, 17.061;
    0, 0, 0, 0, 0, 0, 0, 0, 18.370, 0, 18.956;
    0, 0, 0, 0, 0, 0, 0, 0, 22.043, 0, 22.748
]*in
MinWallThickness := [
    .049, .057, .068, .095, 0, 0, 0, 0, 0, 0, 0;
    .065, .073, .088, .119, 0, 0, 0, 0, 0, 0, 0;
    .065, .073, .091, .126, 0, 0, 0, 0, 0, 0, 0;
    .083, .095, .109, .147, .170, .188, 0.675/17, 0, 0, 0, 0;
    .083, .095, .113, .154, .170, .219, 0.072, 0.07, 0, 0, 0;
    .109, .114, .133, .179, .2, .25, 0.087, 0.073, 0.07, 0, 0;
    .109, .117, .14, .191, .215, .25, 0.108, 0.089, 0.074, 0.07, 0;
    .109, .125, .145, .2, .2258, .281, 0.122, 0.100, 0.083, 0.07, 0;
    .109, 0, .154, .218, .25, .344, 0.150, 0.123, 0.101, 0.083, 2.375/41;
    .12, 0, .203, .276, .3, .375, 0.179, 0.147, 0.120, 0.098, 2.875/41;
    .12, 0, .216, .3, .35, .438, 0.219, 0.177, 0.145, 0.118, 0.095;
    0, 0, 0, 0, 0, 0, 0.249, 0.202, 0.164, 0.133, 0.108;
    .12, 0, .237, .337, .437, .531, 0.281, 0.227, 0.183, 0.148, 0.120;
    .134, 0, .258, .375, .5, .625, 0.347, 0.281, 0.228, 0.182, 0.146;
    .134, 0, .28, .432, .562, .719, 0.414, 0.335, 0.271, 0.216, 0.172;
    .148, .277, .322, .5, .718, .906, 0.539, 0.435, 0.352, 0.281, 0.223;
    .165, .307, .365, .5, .843, 1.125, 0.670, 0.542, 0.438, 0.351, 0.278;
    .18, .330, .406, .687, 1, 1.312, 0.795, 0.643, 0.520, 0.416, 0.330;
    .25, .375, .437, .75, 1.093, 1.406, 14/17, 14/21, 0.538, 14/32.5, 14/41;
    .25, .375, .5, .843, 1.218, 1.593, 16/17, 16/21, 0.615, 16/32.5, 16/41;
    .25, .437, .562, .937, 1.375, 1.781, 18/17, 18/21, 0.692, 18/32.5, 0.439;
    .25, .5, .593, 1.031, 1.5, 1.968, 20/17, 20/21, 0.769, 20/32.5, 0.488;
    .25, .562, .687, 1.218, 1.812, 2.343, 24/17, 24/21, 0.923, 22/32.5, 0.585
]*in
MinWallThickness[22, 3] = 1.218 in  # References
# http://www.harvel.com/tech-specs-pvc-pipe-sdr.asp
# http://availableplastics.com/pvc_pipe_dimensions.html
# Straight Pipe Functions
# Actual inner diameter of a pipe
# Returns a value of inner diameter for a given pipe specification and a nominal pipe size.
innerdiameter(NominalPipeSize, PipeSpecification) :=
    WallThick ← MinWallThickness[index(NominalPipeSize, Pipesizes[:, 0]), PipeSpecification]
    ID ← Pipesizes[index(NominalPipeSize, Pipesizes[:, 0]), 1] - (2*WallThick) if WallThick ≠ 0
    ID ← 0 if WallThick == 0
    IDThick ← AvgInnerDiameter[index(NominalPipeSize, Pipesizes[:, 0]), PipeSpecification]
    return 0 if UsingPipes[index(NominalPipeSize, Pipesizes[:, 0])] == 0
    return IDThick if ((IDThick < ID) and (IDThick ≠ 0))
    return ID otherwise
# innerdiameter(NominalPipeSize, PipeSpecification)
# 1. The wall thickness is found from the minwallthickness matrix above.
# 2. The inner diameter is found by subtracting 2* the wall thickness (two walls for a given pipe diameter) if the wall thickness found from matrix MinWallThickness is not zero.
# 3. If the value in MinWallThickness is zero the inner diameter is given as zero, since the pipe does not exist.
# 4. The value for inner diameter from matrix for avg inner diameter is found to compare to the one calculated. If the wall thickness is too thin it uses this value.
# 5. If the inner diameter from 4. is smaller than the one from 2/3 we know minwall thickness is not equal to zero and the walls are thicker, so we return this value.
# 6. If the inner diameter from 4 is zero it returns the value calculated in step 2/3.
NominalPipeSize(PipeSize) :=
    for i ∈ 0 .. length(Pipesizes[:, 0]) - 1
        NominalPipeSize ← Pipesizes[:, 0][i] if UsingPipes[i] ≠ 0
        break if PipeSize ≤ NominalPipeSize
# NominalPipeSize(PipeSize)
# Until the nominal pipe size is larger than the given pipe size the index is increased
# Once the criterion is met the for loop is broken and the nominal pipe size last found is returned
# If none are larger than the given the largest nominal pipe size is returned
# Example:NominalPipeSize(6.941 in)=8 in
# innerD(PipeSize, PipeSpecification)
# 1. Have to find the first nominal pipe size for the pipe size given
# 2. Calculate the inner diameter based on innerdiameter(NominalPipeSize, PipeSpecification)
# Example:innerD(6.941 in, 8)=7.921 in
innerD(PipeSize, PipeSpecification) :=
    NominalPipeSize ← NominalPipeSize(PipeSize)
    ID ← innerdiameter(NominalPipeSize, PipeSpecification)
    return ID
innerD(6 in, 4) =  # error: This variable is undefined.
innerR(PipeSize, PipeSpecification) := innerD(PipeSize, PipeSpecification)/2
IDindex(index, PipeSpecification) :=
    WallThick ← MinWallThickness[index, PipeSpecification] if UsingPipes[index] ≠ 0
    WallThick ← 0 otherwise
    ID ← Pipesizes[index, 1] - (2*WallThick) if WallThick ≠ 0
    ID ← 0 if WallThick == 0
    NominalSize ← Pipesizes[index, 0]
    IDThick ← [ID, NominalSize]
    ID ← AvgInnerDiameter[index, PipeSpecification] if (AvgInnerDiameter[index, PipeSpecification] < ID)
    return IDThick
# IDindex(index, PipeSpecification)
# This function is similar to innerdiameter(NominalPipeSize, PipeSpecification)
# except that it also returns the nominal pipe size. Thus it outputs a 1x2
# array of inner diameter and nominal pipe size. However instead of inputing
# the nominal pipe size you input the corresponding index number for the
# row of the Pipesizes matrix.
# To Just Return an Array of Inner Diameters:
IDindex1(index, PipeSpecification) :=
    WallThick ← MinWallThickness[index, PipeSpecification] if UsingPipes[index] ≠ 0
    WallThick ← 0 otherwise
    ID ← 0 if WallThick == 0
    ID ← Pipesizes[index, 1] - (2*WallThick) if WallThick ≠ 0
    IDThick ← [ID, WallThick]
    ID ← AvgInnerDiameter[index, PipeSpecification] if (AvgInnerDiameter[index, PipeSpecification] > ID)
    return ID
# IDindex1(index, PipeSpecification)
# This function is similar IDindex(index, PipeSpecification) except
# that it only returns the inner diameter based on the index given.
# Actual outer diameter of a pipe
outerdiameter(NominalPipeSize) :=
    return Pipesizes[index(NominalPipeSize, Pipesizes[:, 0]), 1] if UsingPipes[index(NominalPipeSize, Pipesizes[:, 0])] ≠ 0
    return 0 otherwise  # Outerdiameter returns the average outer diameter of a pipe based on its nominal pipe size
# Outerradius finds the radius based on the Outerdiameter
outerradius(NominalPipeSize) := outerdiameter(NominalPipeSize)/2
# Available Pipe Sizes: Returns an Array of Inner Diameters and Nominal Pipe Sizes
AvailPipeSizes(PipeSpecification) :=
    j ← 0
    for i ∈ 0, 1 .. length(Pipesizes[:, 0]) - 1
        if UsingPipes[i] ≠ 0
            InnerDiameter ← IDindex(i, PipeSpecification)
            if InnerDiameter[:, 0] ≠ [0]
                Sizes[j, 0] ← InnerDiameter[:, 0][0]
                Sizes[j, 1] ← InnerDiameter[:, 1][0]
                j ← j + 1
    return Sizes
# AvailPipeSizes(PipeSpecification)
# This function returns an array of available pipe sizes given a
# pipe specification. For every row in the Pipesizes matrix it calculates
# the inner diameter from IDindex which returns the inner diameter and
# the nominal pipe size. If the inner diameter is not equal to zero the pipe
# exists and the inner diameters are returned in the first column and
# the nominal pipe sizes are returned in the second.
findindexID(NominalPipeSize, PipeSpecification) :=
    ID ← innerdiameter(NominalPipeSize, PipeSpecification)
    i ← 0
    innerDs ← AvailPipeSizes(PipeSpecification)[:, 0]
    while innerDs[i] < ID
        i ← i + 1
    return i
A_circle(D) := π*D^2/4
A_pipes(PipeSpecification) :=
    innerDar ← AvailPipeSizes(PipeSpecification)[:, 0]
    for i ∈ 0 .. length(innerDar) - 1
        A[i] ← A_circle(innerDar[i])
    return A
NominalDiameter(ID_pipe, PipeSpecification) :=
    i ← 0
    while AvailPipeSizes(PipeSpecification)[:, 0][i] < ID_pipe
        i ← i + 1
        break if i == last(AvailPipeSizes(PipeSpecification)[:, 0])
    return AvailPipeSizes(PipeSpecification)[i, 1]  # Given minimum ID of a pipe it returns the nominal pipe size
# Fittings
# Outer
# Diameter
# elbow radius
# socket depth
# male adapter
# lengths
# cap diameter
# coupling
# lengths
# (sched 80)
# Flex
# Coupling
# Length
# Inner
# Diamter
# nominal pipe size
# tee length
# cap height
# http://www.lascofittings.com/products/catalog/PDF/Tech80.pdf
# for coupling lengths (assumes sched 80)
# 5 in coupling is a sched 40 (since no sched 80 is available)
# sched 40 for adapter lengths because they have a wider range of available NDs
# socket depths do not work out exactly for couplings/adapters but they are close!
pipefittings := [
    1/8*in, 0 in, 0 in, 0 in, 0 in, 0 in, 0 in, 0 in, 0 in, 0 in, 0 in;
    1/4*in, 0 in, 0 in, 0 in, 0 in, 0 in, 0 in, 1.325 in, 0 in, 0 in, 0 in;
    3/8*in, 0 in, 0 in, 0 in, 7/8*in, 1 in, 0 in, 1.5938 in, 0 in, 0 in, 0 in;
    1/2*in, 0 in, 1 in, 0 in, (1 + 3/32)*in, (1 + 1/32)*in, (1 + 23/32)*in, 1.8438 in, 0 in, 0 in, 0 in;
    3/4*in, (1 + 1/8)*in, (1 + 1/8)*in, 0 in, (1 + 5/16)*in, (1 + 5/16)*in, (1 + 5/8)*in, 2.0938 in, 2.375 in, 1.217 in, 1.05 in;
    1 in, 1.5 in, 1.5 in, 27 mm, (1 + 9/16)*in, (1 + 9/16)*in, (2 + 3/16)*in, 2.3438 in, 2.375 in, 1.482 in, 1.315 in;
    1.25 in, 0 in, 0 in, 0 in, (1 + 31/32)*in, (1 + 3/4)*in, (2 + 17/32)*in, 2.5938 in, 3.5 in, 1.827 in, 1.66 in;
    1.5 in, 2.25 in, 2.25 in, 32 mm, (2 + 1/4)*in, (1 + 7/8)*in, (2 + 9/16)*in, 2.8438 in, 3.4375 in, 2.067 in, 1.9 in;
    2 in, 3 in, 2.5 in, 46 mm, (2 + 22/32)*in, (2 + 1/32)*in, (2 + 11/16)*in, 3.0938 in, 3.5 in, 2.542 in, 2.375 in;
    2.5 in, 3.75 in, 3 in, 46 mm, (3 + 5/16)*in, (2 + 9/16)*in, (3 + 7/8)*in, 3.6875 in, 0 in, 0 in, 0 in;
    3 in, 4.5 in, (3 + 3/8)*in, 46 mm, 4 in, (2 + 29/32)*in, (3 + 15/16)*in, 3.9375 in, 4 in, 3.75 in, 3.5 in;
    3.5 in, 0 in, 0 in, 0 in, 0 in, 0 in, 0 in, 0 in, 0 in, 0 in, 0 in;
    4 in, 6 in, (4 + 1/8)*in, 57 mm, (5 + 1/16)*in, (3 + 1/8)*in, (4 + 3/32)*in, 4.6875 in, 4 in, 4.75 in, 4.5 in;
    5 in, 195 mm, 127 mm, 57 mm, (6 + 5/32)*in, (4 + 1/2)*in, (5 + 3/16)*in, (6 + 9/32)*in, 4 in, 5.813 in, 5.563 in;
    6 in, 9 in, (5 + 5/8)*in, 57 mm, (7 + 1/4)*in, 5 in, (5 + 27/32)*in, 6.25 in, 5.75 in, 6.875 in, 6.625 in;
    8 in, 12 in, 7 in, 64 mm, (9 + 5/16)*in, (6 + 3/8)*in, (7 + 1/8)*in, 8.25 in, 6 in, 8.875 in, 8.625 in;
    10 in, 15 in, 8.5 in, 70 mm, (11 + 13/16)*in, (5 + 1/4)*in, 0 in, 0 in, 5.875 in, 11 in, 10.75 in;
    12 in, 18 in, 10 in, 76 mm, (13 + 7/8)*in, (6 + 3/4)*in, 0 in, 0 in, 6.3125 in, 13 in, 12.75 in;
    14 in, 21 in, 11 in, 89 mm, 15 in, (7 + 3/8)*in, 0 in, 0 in, 0 in, 0 in, 0 in;
    16 in, 24 in, 12 in, 102 mm, 17 in, 9 in, 0 in, 0 in, 0 in, 0 in, 0 in;
    18 in, 27 in, 13.5 in, 105 mm, (19 + 1/16)*in, 9 in, 0 in, 0 in, 9.875 in, 18.25 in, 18 in;
    20 in, 30 in, 15 in, 111 mm, (21 + 3/16)*in, (12 + 1/4)*in, 0 in, 0 in, 0 in, 0 in, 0 in;
    24 in, 36 in, 17 in, 127 mm, 0 in, 0 in, 0 in, 0 in, 0 in, 0 in, 0 in
]
ElbowRadius(NominalPipeSize) := pipefittings[index(NominalPipeSize, Pipesizes[:, 0]), 1]
ShortTeeLength(NominalPipeSize) := pipefittings[index(NominalPipeSize, Pipesizes[:, 0]), 2]
TeeLength(NominalPipeSize) := 2*ShortTeeLength(NominalPipeSize)  # 1.2 is a negotiable constant  # Is this a design assumption?
SocketDepth(NominalPipeSize) := pipefittings[index(NominalPipeSize, Pipesizes[:, 0]), 3]
CrossLength(NominalPipeSize) := 2*ShortTeeLength(NominalPipeSize)
ConRadius(NominalPipeSize) := 1.2*outerradius(NominalPipeSize)
CapDiameter(NominalPipeSize) := pipefittings[index(NominalPipeSize, Pipesizes[:, 0]), 4]  # based on library butterfly valve dimensions
CapHeight(NominalPipeSize) := pipefittings[index(NominalPipeSize, Pipesizes[:, 0]), 5]
MaleAdapterLength(NominalPipeSize) := pipefittings[index(NominalPipeSize, Pipesizes[:, 0]), 6]
CouplingLength(NominalPipeSize) := pipefittings[index(NominalPipeSize, Pipesizes[:, 0]), 7]
ValveLength(ND) := 0.2052/0.152*ND
OuterRadiusFlex(NominalPipeSize) := pipefittings[index(NominalPipeSize, Pipesizes[:, 0]), 9]/2
OuterDiameterFlex(NominalPipeSize) := pipefittings[index(NominalPipeSize, Pipesizes[:, 0]), 9]
# Only inner diameter was given for flexible couplings;
# however, the exact outer diameter is not particularly
# important, so this design assumption was made.
InnerDiameterFlex(NominalPipeSize) := pipefittings[index(NominalPipeSize, Pipesizes[:, 0]), 10]
InnerRadiusFlex(NominalPipeSize) := pipefittings[index(NominalPipeSize, Pipesizes[:, 0]), 10]/2
CouplingLengthFlex(NominalPipeSize) := pipefittings[index(NominalPipeSize, Pipesizes[:, 0]), 8]
# This is a design assumption.
SocketDepthFlex(NominalPipeSize) := pipefittings[index(NominalPipeSize, Pipesizes[:, 0]), 8]/2
# elbow radius | male adapter lengths
# nominal pipe size | socket depth
# tee length | coupling lengths (sched 80)
# These values are not accurate!
FlexPipeFittings := [
    1/8*in, 0 in, 0 in, 0 in, 0 in, 0 in;
    1/4*in, 0 in, 0 in, 0 in, 0 in, 13/16*in;
    3/8*in, 0 in, 0 in, 0 in, 0 in, 7/8*in;
    1/2*in, 0 in, 1 in, 0 in, (1 + 7/8)*in, (1 + 55/64)*in;
    3/4*in, (1 + 1/8)*in, (1 + 1/8)*in, 0 in, (2 + 3/16)*in, (2 + 1/8)*in;
    1 in, 1.5 in, 1.5 in, 27 mm, (2 + 3/8)*in, (2 + 23/64)*in;
    1.25 in, 0 in, 0 in, 0 in, (2 + 9/16)*in, (2 + 51/64)*in;
    1.5 in, 2.25 in, 2.25 in, 32 mm, (2 + 11/16)*in, (3 + 1/32)*in;
    2 in, 3 in, 2.5 in, 46 mm, (2 + 7/8)*in, (3 + 19/64)*in;
    2.5 in, 3.75 in, 3 in, 46 mm, (3 + 11/16)*in, (3 + 51/64)*in;
    3 in, 4.5 in, (3 + 3/8)*in, 46 mm, (3 + 15/16)*in, 4 in;
    3.5 in, 0 in, 0 in, 0 in, 0 in, (4 + 3/4)*in;
    4 in, 6 in, (4 + 1/8)*in, 57 mm, 4.5 in, (6 + 7/32)*in;
    5 in, 195 mm, 127 mm, 57 mm, 0 in, (8 + 9/32)*in;
    6 in, 9 in, (5 + 5/8)*in, 57 mm, 0 in, 0 in;
    8 in, 12 in, 7 in, 64 mm, 0 in, 0 in;
    10 in, 15 in, 8.5 in, 70 mm, 0 in, 0 in;
    12 in, 18 in, 10 in, 76 mm, 0 in, 0 in;
    14 in, 21 in, 11 in, 89 mm, 0 in, 0 in;
    16 in, 24 in, 12 in, 102 mm, 0 in, 0 in;
    18 in, 27 in, 13.5 in, 105 mm, 0 in, 0 in;
    20 in, 30 in, 15 in, 111 mm, 0 in, 0 in;
    24 in, 36 in, 17 in, 127 mm, 0 in, 0 in
]
FlexElbowRadius(NominalPipeSize) := pipefittings[index(NominalPipeSize, Pipesizes[:, 0]), 1]
FlexShortTeeLength(NominalPipeSize) := pipefittings[index(NominalPipeSize, Pipesizes[:, 0]), 2]
FlexTeeLength(NominalPipeSize) := 2*ShortTeeLength(NominalPipeSize)
FlexSocketDepth(NominalPipeSize) := pipefittings[index(NominalPipeSize, Pipesizes[:, 0]), 3]
FlexCrossLength(NominalPipeSize) := 2*ShortTeeLength(NominalPipeSize)
FlexConRadius(NominalPipeSize) := 1.2*outerradius(NominalPipeSize)
# 1.2 is a negotiable constant
FlexMaleAdapterLength(NominalPipeSize) := pipefittings[index(NominalPipeSize, Pipesizes[:, 0]), 4]
FlexCouplingLength(NominalPipeSize) := pipefittings[index(NominalPipeSize, Pipesizes[:, 0]), 5]
Pipesizescoupling := [
    .405 in, 1/8*in;
    .540 in, 1/4*in;
    .675 in, 3/8*in;
    .840 in, 1/2*in;
    1.050 in, 3/4*in;
    1.315 in, 1 in;
    1.66 in, 1.25 in;
    1.9 in, 1.5 in;
    2.375 in, 2 in;
    2.875 in, 2.5 in;
    3.5 in, 3 in;
    4 in, 3.5 in;
    4.5 in, 4 in;
    5.563 in, 5 in;
    6.625 in, 6 in;
    8.625 in, 8 in;
    10.75 in, 10 in;
    12.75 in, 12 in;
    14 in, 14 in;
    16 in, 16 in;
    18 in, 18 in;
    20 in, 20 in;
    24 in, 24 in
]
Pipesizes := [
    1/8*in, .405 in;
    1/4*in, .540 in;
    3/8*in, .675 in;
    1/2*in, .840 in;
    3/4*in, 1.050 in;
    1 in, 1.315 in;
    1.25 in, 1.66 in;
    1.5 in, 1.9 in;
    2 in, 2.375 in;
    2.5 in, 2.875 in;
    3 in, 3.5 in;
    3.5 in, 4 in;
    4 in, 4.5 in;
    5 in, 5.563 in;
    6 in, 6.625 in;
    8 in, 8.625 in;
    10 in, 10.75 in;
    12 in, 12.75 in;
    14 in, 14 in;
    16 in, 16 in;
    18 in, 18 in;
    20 in, 20 in;
    24 in, 24 in
]
# Flexible Couplings and Fittings for Pipe
# For Pipe Size | For Pipe Size | Lg | For Pipe OD | For Pipe Size
# For Pipe OD | Lg
Flex90degreeElbows := [1.900 in, 1.5 in; 2.375 in, 2 in; 3.500 in, 3 in; 4.500 in, 4 in]
FlexTees := [1.900 in, 1.5 in; 2.375 in, 2 in; 3.500 in, 3 in; 4.500 in, 4 in]
FlexCouplings := [
    1.050 in, .75 in, 2.375 in;
    1.315 in, 1 in, 2.375 in;
    1.660 in, 1.25 in, 3.5 in;
    1.900 in, 1.5 in, 3.4375 in;
    2.375 in, 2 in, 3.5 in;
    3.500 in, 3 in, 4 in;
    4.500 in, 4 in, 4 in;
    5.563 in, 5 in, 4 in;
    6.625 in, 6 in, 5.75 in;
    8.625 in, 8 in, 6 in;
    10.750 in, 10 in, 5.875 in;
    12.750 in, 12 in, 6.3125 in;
    15.000 in, 15 in, 10 in;
    18.000 in, 18 in, 9.875 in
]
FlexReducingCouplings := [
    1.5 in, 1.25 in, 3.5 in;
    2 in, 1.25 in, 3.5 in;
    2 in, 1.5 in, 3.4375 in;
    3 in, 1.5 in, 3.875 in;
    3 in, 2 in, 4 in;
    4 in, 1.5 in, 4 in;
    4 in, 2 in, 3.875 in;
    4 in, 3 in, 4 in;
    5 in, 3 in, 3.875 in;
    5 in, 4 in, 4 in;
    6 in, 3 in, 5.75 in;
    6 in, 4 in, 5.75 in;
    6 in, 5 in, 5.75 in;
    8 in, 4 in, 6 in;
    8 in, 6 in, 6 in;
    10 in, 8 in, 6 in;
    12 in, 10 in, 6.375 in
]
FlexCaps := [1.900 in, 1.5 in; 2.375 in, 2 in; 3.500 in, 3 in; 4.500 in, 4 in]
# Flexible Couplings for Plastic Pipe and Fittings
# For
# Pipe Size
# Lg
# For
# Pipe Size
# Lg
# For
# Pipe OD
# For
# Pipe OD
# Coupling ID
# Coupling ID | A  x  B
FlexPEtoSE := [
    1.900 in, 1.5 in, 1.97 in, 2.26 in, 4 in;
    2.375 in, 2 in, 2.40 in, 2.69 in, 4 in;
    3.500 in, 3 in, 3.49 in, 3.9 in, 4 in;
    4.500 in, 4 in, 4.50 in, 4.92 in, 4 in
]
FlexSEtoSE := [
    1.900 in, 1.5 in, 2.26 in, 4 in;
    2.375 in, 2 in, 2.70 in, 4 in;
    3.500 in, 3 in, 3.94 in, 4 in;
    4.500 in, 4 in, 5.01 in, 4 in
]
# Socket End to Socket End | Pipe End to Socket End
# For
# Pipe Size
# Lg
# For
# Pipe OD
# Coupling ID
# A  x  B
FlexPEtoCP := [
    3.500 in, 3 in, 3.44 in, 3.57 in, 4 in;
    4.500 in, 4 in, 4.29 in, 4.78 in, 4 in;
    6.625 in, 6 in, 6.50 in, 6.83 in, 6 in;
    8.625 in, 8 in, 8.42 in, 9.76 in, 6 in
]
# Pipe End to Corrugated Pipe
# Low-Pressure Cut-to-Length Couplings for Pipe
# For
# Pipe Size
# For
# Pipe OD
# Bend
# Radius
FlexCtLCouplingsSize := [2.375 in, 2 in, 3.5 in; 3.500 in, 3 in, 7 in; 4.500 in, 4 in, 9 in]
