# [reference: FluidsFunctions.xmcd]
# Rapid Mixer
# Parameters
Q_Plant := 3000*L/min  # Gracias Plant flow rate
# Specific for diffuser:
Pi_VenaContractaOrifice := 0.62  # orifice headloss coefficient
K_Exp := 1  # headloss coefficient of jet
Pi_Dmix := 2.4  # ratio of diffusion length scale to kolmogorov length scale (smallest eddies in turbulent flow)
Tau_diffusion := 10 s  # time scale of diffusion
Π_FlocCell := 2
Nu_Water := 1*10^-6*m^2/s  # kinematic viscosity of water
D_m := 0.673*10^-5*cm^2/s  # Diffusion coefficient
# Calculations: Energy Dissipation at Orifice
# IMPORTANT NOTE: Energy dissipation rate from minor headloss has to be greater than diffusion requirements: ε = 0.5-1.0W/kg
# Minimum value of energy dissipation rate for diffusion:
ε_Min := Pi_Dmix^4*Nu_Water^3/(D_m^2*Tau_diffusion^2) = 0.732512 W/kg
# If energy dissipation rate of bulk fluid =====================>
ε_FlocEntryOrifice := 0.8*W/kg
V_FlocEntryOrifice := (2*ε_FlocEntryOrifice*sqrt(Q_Plant)/K_Exp)^(2/7) = 0.745519 m/s
# IMPORTANT NOTE:
# To calculate the headloss at the entrance to the flocculator we must use the velocity at that precice location.  We know that the velocity (before going through the orifice) needs to be increased by 1/korifice (from orifice equa.) to compensate for the  compression of the fliud through the orifice.  Therefore, note that Vjet=Vbulk/kori in the headloss equa.
θ := sqrt(Q_Plant/V_FlocEntryOrifice^3) = 0.347374 s
# Minor head loss
HL_FlocEntryOrifice := K_Exp*(V_FlocEntryOrifice/Pi_VenaContractaOrifice)^2/(2*g) = 7.37196 cm
# Areas of entrance (to flocculator):
A_Port(Π_FlocCell, K_Exp, Q_Plant, ε_FlocEntryOrifice, Pi_VenaContractaOrifice) = 887.383 cm^2
A_FlocEntry := A_Port(Π_FlocCell, K_Exp, Q_Plant, ε_FlocEntryOrifice, Pi_VenaContractaOrifice)
# If entrance has a circular orifice:
D_FlocEntryOrifice := sqrt(4*A_FlocEntry/π) = 33.6133 cm
# If entrance has a rectangular orifice:
# Assume ==>
L_FlocEntryOrifice := 13 cm  # Length cannot be greater than first baffle spacing*************
W_FlocEntryOrifice := A_FlocEntry/L_FlocEntryOrifice = 68.2602 cm
# Calculating: Upper Waterfall Orifice (Entrance Tank Orifice)
# Note, that it would nicw to have all spacings equal (so that the first spacing is not different to the first baffles)
# Assume:
HW_EtMax := 20 cm
A_orifice(HW_EtMax, Pi_VenaContractaOrifice, Q_Plant) = 407.181 cm^2
# Remember that we are using sqrt(2*g*h) instead of the Vbulk because we want to use  the Vjet since we are calculating the vena cava area.  From the minor head loss equa. we know that h is dependent on Vjet and not Vbulk.
A_EtOrifice := A_orifice(HW_EtMax, Pi_VenaContractaOrifice, Q_Plant)
# If we assume that the width is:
W_EtOrifice := 4 cm
L_trueET := A_EtOrifice/W_EtOrifice = 1.01795 m
# If the flow rate decreased significantly for the height/head to fall from 20cm to WtrueET/2 (this being the minimum height/head allowed) that plant would operate at this percentage of its max capacity:
# Since the orifice has to be submerged at all times,use half of the rectangular orifice's width.
HW_EtMin := W_EtOrifice/2
# If H.etheadmin doesn't take the contraction into account
Pi_EtFlow := Pi_VenaContractaOrifice*A_EtOrifice*sqrt(2*g*HW_EtMin)/Q_Plant = 0.316228
# Ratio of the minimum flow divided by the maximum flow through the plant.  Gives the flow range possible through the plant.
# Calculating the upper and lower channel dimenions
K_RapidMix := 1.3  # mixing required before energy dissipation in jet occurs
j := 0 .. 40  # Range of widths for upper channel
W_EtChannel[j] := (10 + j)*cm
# critical depth over water fall
y_crit := ((Q_Plant/W_EtChannel)^2/g)^(1/3)
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A_EtChannelWater[j] := y_crit[j]*W_EtChannel[j]
# Cross sectional area of upper channel flow at critical depth pt.
V_EtChannel := Q_Plant/A_EtChannelWater
HW_EtChannel := K_RapidMix*V_EtChannel^2/(2*g)  # Height of second waterfall based on critical depth at edge and minor loss coefficient of 1.3
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# Calculating Height at the back of the Upper Channel
# calculations below based on smallest water fall height, width of channel vs. water fall height still needs to be optimized
HW_EtChannel[30] = 7.59183 cm
y_crit[30] = 11.6797 cm
R_h(w, b) := w*b/(2*w + b)  # hydraulic radius
W_EtChannel[30] = 40 cm
Re_pipetransition := 2100  # Re channel transition?
Re_rect(Q, w, b, ν) := 4*Q*R_h(w, b)/(w*b*ν)
f_rect(Q, w, b, ν, ε) :=
    f ← 0.25/log(ε/(3.7*4*R_h(w, b)) + 5.74/Re_rect(Q, w, b, ν)^0.9)^2 if Re_rect(Q, w, b, ν) > Re_pipetransition
    f ← 64/Re_rect(Q, w, b, ν) otherwise
    return f
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S_f(f, V, R_h) := f*V^2/(8*g*R_h)  # slope of water level in channel
roughness := 0.014 mm
# DIRECT STEP METHOD- assuming subcritical flow
HW_channel(y, w, dely, Q, L, ε, ν) :=
    x_total ← 0 m
    while x_total < L
        V_Channel1 ← Q/(y*w)
        V_Channel2 ← Q/((y + dely)*w)
        delx ← (-dely + V_Channel1^2/(2*g) - V_Channel2^2/(2*g))/(-S_f(f_rect(Q, y, w, ν, ε), V_Channel1, R_h(y, w)))
        y ← y + dely
        x_total ← x_total + delx
    return y
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dely := 0.0001 cm
HW_Channel2 := HW_channel(y_crit[30], W_EtChannel[30], dely, Q_Plant, L_trueET, roughness, Nu_Water) = 13.1658 cm
# Calculating: Height of water at entrance tank
# Assumptions based on master mathCAD file for Gracias Plant:
HW_Sed := 2 m
HL_Floc := (4/3)*21.3*cm = 28.4 cm  # Assume a K of 4 rather than 3 to determine change headloss in floculator.
HW_Total := HW_EtMax + HL_FlocEntryOrifice + HL_Floc + HW_Sed + HW_Channel2 + HW_EtChannel[30] = 2.7653 m
# Calculating: Size of Entrance Tank
V_EtUp := 700*m/day
A_Et := Q_Plant/V_EtUp = 6.17143 m^2
# Assume Entrance Tank is square:
L_Et := sqrt(A_Et) = 2.48424 m
# Calculating: Size of Alum Stock Tank
Ti_StockMin := 30 hr
C_FcmAlum := 120*gm/L
C_FcmDoseMax := 90*mg/L
Q_AlumStockMax := Q_Plant*C_FcmDoseMax/C_FcmAlum = 2.25 L/min
Vol_Stock := Q_AlumStockMax*Ti_StockMin = 4.05 m^3
