# [reference: BasicInputs.xmcd]
# [reference: ExpertInputs.xmcd]
# [reference: DesignAssumptions.xmcd]
# [reference: MathFunctions.xmcd]
# [reference: PipeDatabase.xmcd]
# [reference: MinorLossCoefficients.xmcd]
# [reference: FluidsFunctions.xmcd]
# [reference: Sedimentation Tank.xmcd]
# Design References
Q_Plant = 12 L/s
## Constraints
# Max head loss through inlet piping during filtration
# Max head loss through inlet piping during backwash
# Max head loss through outlet piping during filtration
# Max head loss through outlet piping during backwash (siphon)
# Max ratio of head loss in manifold to head loss through filter layer during filtration
# Max ratio of head loss in manifold to head loss through filter layer during filtration
## Filter Bed Sizing
# Select the stacked filter configuration and backwash velocity
V_FiBw := 11*mm/s  # CEPIS says 11 mm/s. The success of lab-scale backwashing at 10 mm/s suggests that this is a reasonable and conservative value
N_FiLayer := 6  # We choose 2 filters for now, each of which will have 6 sand layers.
# Calculate the required filtration velocity and filter area
V_FiLayer := V_FiBw/N_FiLayer = 1.83333 mm/s
# 1.4 mm/s to 1.7 mm/s is the design value recommended by CEPIS.  The 1.83 mm/s velocity was tested on the lab scale and seems to work.  It is also within the typical range for filters according to the AWWA guidelines.
V_FiLayer = 158.4 m/day
# Determine the geometry of the filter
# Note: The filter is rectangular for now, but we may consider cylindrical shapes later due to large filter bed sizes.  The filter is not constrained by any underdrains because of the use of manifolds
T_FiLayer := 20 cm  # Depth of each filter layer
H_FiSand := N_FiLayer*T_FiLayer = 1.2 m  # The total depth of sand
# Top View | Side View
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# Calculate the head loss through the inlet plumbing
# This is for the piping prior to entering the filterbox/manifold
# List the assumed properties of the sand in the filter
# The listed properties include the diameter of sand, density of a sand grain, density of water,
# and the porosity of a sand bed.
D_FiSand := 0.5 mm  # Average estimated diameter of sand
ε_FiSand := 0.4  # Porosity in a sand bed
Rho_Water := 1000*kg/m^3  # Density of sand and water, respectively
Rho_FiSand := 2650*kg/m^3
# Calculate the clean-bed head loss during filtration
# The head loss across each layer of the filter must be large compared to losses in the plumbing that distributes water into the sand bed, in order for the water to be distributed uniformly to each layer.  At the beginning of a filtration cycle when the sand bed is clean, the head loss is the smallest.  This minimum head loss during filtration is estimated by the Carman-Kozeny equation.
k_Kozeny := 5  # Carman-Kozeny coefficient
h_lKozeny(L, D, V, ε, ν) := k_Kozeny*L*ν/g*(1 - ε)^2/ε^3*36/D^2*V
HL_FiCleanLayer := h_lKozeny(T_FiLayer, D_FiSand, V_FiLayer, ε_FiSand, Nu_Water)
HL_FiCleanLayer = 0.151428 m
# The head loss in the slotted pipes will be small compared with the clean bed head loss. Head loss in the filter media will thus equilibrate the flow.
# Calculate the head loss across the bed during backwashing
# The head loss during backwash is the energy required to fluidize the sand in the filter.
HL_FiBwSS := H_FiSand*(Rho_FiSand - Rho_Water)*(1 - ε_FiSand)/Rho_Water
# The backwash head loss is almost exactly equal  to the sand bed depth. Note that this ignores losses in the plumbing.
HL_FiBwSS = 1.188 m
# This is a design constraint we have chosen so the filter box is not too tall.  It is the additional head loss in the filter media as it becomes full.  Does not include the clean bed head loss.
HL_FiDirty := 30 cm
HL_FiTerminal := HL_FiCleanLayer + HL_FiDirty  # Terminal head loss through the filter; set to be 30 cm and the signal for backwash
HL_FiTerminal = 0.451428 m
V_FiMinFluidization := 5*mm/s  # The 11 mm/s that is used above is for steady state; this is only an initiation number
HL_FiBwSF := 40 cm
# Monroe reduced this to more closely match the observed head loss in the lab.
HL_FiBwInitiation := HL_FiBwSF + HL_FiBwSS = 1.588 m
# Pressure recovery dominates major and minor losses, so it will set our manifold and trunk pipe sizes
Pi_FiManifoldHeadLoss := 0.1
# Ratio of head loss through the slotted pipes to the head loss through the clean bed; this is half the total head loss in the manifold, the other half will be in the trunk line.  Due to the sqrt(h) relationship this will lead to about 11% overall variability through the inlet piping.
# Exit and entrance pipes will have additional head loss. We need to verify that this head loss is acceptable. The constraint is that we don't want excessive head loss through these pipes because that head loss will force us to use a deeper filter box or will result in lower water level elevation in the effluent.
HL_FiManifoldTarget := HL_FiCleanLayer*Pi_FiManifoldHeadLoss = 1.51428 cm
# Use 3*HL target because when the pipe is a manifold, the ehad loss is actually cut by a factor of 3
E_Pvc = 0.00012 m  # Roughness
V_FiMaxPR := sqrt(2*g*HL_FiManifoldTarget) = 0.544977 m/s
B_FiManifoldBranch := 10 cm
## Max Flow Through 1 Filter
ND_ManBranchMax := 1.5 in
ID_ManBranchMax := innerdiameter(ND_ManBranchMax, EN_PipeSpec) = 1.734 in
Q_ManBranchMax := π*ID_ManBranchMax^2/4*V_FiMaxPR = 0.830297 L/s
N_ManBranchMax := 20
Q_FiMaxBranch := Q_ManBranchMax*N_ManBranchMax*3 = 49.8178 L/s
ND_FiBwTrunkMax := 8 in
ID_FiBwTrunkMax := innerdiameter(ND_FiBwTrunkMax, EN_PipeSpec) = 7.921 in
# This is limiting, so if we can make it bigger, the filter can handle a much larger flow.  The solution would be to put it in the floor of the filter.
Q_FiMaxBwTrunk := π*ID_FiBwTrunkMax^2/4*V_FiMaxPR = 17.3259 L/s
ND_FiTrunkMax := 6 in
ID_FiTrunkMax := innerdiameter(ND_FiTrunkMax, EN_PipeSpec) = 6.083 in
Q_TrunkMax := π*ID_FiTrunkMax^2/4*V_FiMaxPR = 10.2181 L/s
Q_FiMaxTrunk := Q_TrunkMax*3 = 30.6544 L/s
Q_FiMax := min(Q_FiMaxBranch, Q_FiMaxBwTrunk, Q_FiMaxTrunk) = 17.3259 L/s
# If one filter can handle it, this ratio will be less than one
N_Fi :=
    1 if Q_Plant/Q_FiMax < 1
    otherwise
        ceil(Q_Plant/Q_FiMax) if mod(ceil(Q_Plant/Q_FiMax), 2) == 0
        ceil(Q_Plant/Q_FiMax) + 1 otherwise
    = 1
# If the ratio is greater than 1, we want an even number of filters, so we check to see if it already defaulted to an even value.  If not, we add one.
# The flow will be divided evenly between the N_Fi = 1 filters.
Q_Fi := Q_Plant/N_Fi = 12 L/s
A_Fi := Q_Fi/(N_FiLayer*V_FiLayer) = 1.09091 m^2  # This is the required area of each of the N_Fi = 1 filters.
ManBranchSize :=
    ManBranchSize[0] ← Pipesizes[5, 0]
    ManBranchSize[1] ← Pipesizes[7, 0]
    return ManBranchSize  # Pipe sizes listed in order, regardless of PipeSpec
BranchManQ :=
    for i ∈ 0 .. rows(ManBranchSize) - 1
        BranchManQ[i] ← V_FiMaxPR*π*innerdiameter(ManBranchSize[i], EN_PipeSpec)^2/4
    return BranchManQ
# Calculates Q in the manifold branch given the Velocity
BranchManL :=
    for i ∈ 0 .. rows(ManBranchSize) - 1
        BranchManL[i] ← BranchManQ[i]/(2*V_FiLayer*B_FiManifoldBranch)
    return BranchManL
# Calculates the length of the manifold branch given the filtration area and filtration velocity
NumBranch :=
    for i ∈ 0 .. rows(ManBranchSize) - 1
        NumBranch[i] ← A_Fi/(BranchManL[i]*B_FiManifoldBranch) if BranchManL[i] ≠ 0
    return NumBranch  # Calculates the number of branches reach the required filtration area
ManBranchSize = [1; 1.5] in
BranchManQ = [0.381251; 0.830297] L/s
BranchManL = [103.978; 226.445] cm
NumBranch = [10.4918; 4.81755]
Index :=
    i ← 0
    while i ≤ rows(ManBranchSize) - 1
        i ← i + 1 if NumBranch[i] > 20
        return i otherwise
    return i
    = 0
# This returns the index of the smallest diameter pipe that has less than 20 manifold branches.  This is a contrained value based on what seems reasonable.  For now, there are only 2 pipe sizes we would use (1" and 1.5") for flow rates from 6 L/s to 25 L/s, bu tin the event we would have larger flow rates for a single filter box, this algorithm will still work once the above arrays are modified.
HL_FiManBranch := 1/3*h_l(BranchManQ[Index], innerD(ManBranchSize[Index], 2), BranchManL[Index], K_PipeExit, Nu_Water, E_Pvc) = 18.6852 mm
ND_FiManBranch := ManBranchSize[Index] = 1 in
# Just a check and used to calculate tank heights.
N_FiManBranch := ceil(NumBranch[Index]) = 11
L_FiManBranch := A_Fi/(N_FiManBranch*B_FiManifoldBranch) = 0.991736 m
W_FiActive := L_FiManBranch = 0.991736 m
# This is only the active filtration width.  The actual box has the manifold turck lines embedded in concrete on either side, 2 wall thicknesses, and a lip to hold the manifold branches from lifting during backwash.
L_Fi := N_FiManBranch*B_FiManifoldBranch = 1.1 m
Q_FiLayer := 2*Q_Fi/N_FiLayer = 4 L/s  # This is the flow rate through one of the inner trunk lines as it feeds 2 layers
Q_FiManBranch := BranchManQ[Index] = 0.381251 L/s
# The bottom manifold needs to be designed to handle full filter flow for backwash operation
Q_FiBwManBranch := Q_Fi/N_FiManBranch = 1.09091 L/s  # branches on one side of trunk
ND_FiBwManBranch := D_pipeschedule(Q_FiBwManBranch, EN_PipeSpec, Pi_FiManifoldHeadLoss*HL_FiBwSS, W_FiActive, Nu_Water, E_Pvc, K_PipeExit) = 1.5 in
# The method for calculating this needs to be changed so we use PR and not HL
PR_FiBwManBranch := (Q_FiBwManBranch/(π*innerD(ND_FiBwManBranch, EN_PipeSpec)^2/4))^2/(2*g) = 2.61406 cm
HL_FiBwManBranch := 1/3*h_l(Q_FiBwManBranch, innerD(ND_FiBwManBranch, EN_PipeSpec), W_FiActive, K_PipeExit, Nu_Water, E_Pvc) = 14.5325 mm
# We want to design the size of the slots in the backwash manifold so that it has significant head loss.  This will ensure that the whole bed fluidizes and eliminates the posibility of only half of it doing so.  This head loss will be lower by a factor of six (read: negligible) during filtration.
# design of restricting orifices in the backwash branches to ensure that flow distributes uniformly during backwash
# Set the orifice head loss during filtration to be equal to the 10% of clean bed head loss
# Use that to determine the total orifice area (slot area) in the backwash manifolds.
# Slotted Pipe Specs Backwash
A_FiBwOrifices := A_orifice(HL_FiManifoldTarget, Pi_VenaContractaOrifice, Q_FiBwManBranch) = 31.7738 cm^2
# How do we decide the number of slots and their spacing? We don't have an A.FiManSlot
L_FiBwManSlotTotal := A_FiBwOrifices/(.2 mm) = 15.8869 m
ND_FiBwManBranch = 1.5 in
π*innerD(ND_FiBwManBranch, EN_PipeSpec) = 13.8367 cm
L_FiBwManSlot := π*innerD(ND_FiBwManBranch, EN_PipeSpec)/4 = 3.45918 cm  # This is for 1 slot on either side of the pipe each being 1/4 of the circumferance
S_FiBwManSlot := 2*L_FiBwManSlot/(L_FiBwManSlotTotal/W_FiActive) = 0.431876 cm
# Slotted Pipe Specs Filtration
A_FiOrifices := A_orifice(HL_FiManifoldTarget, Pi_VenaContractaOrifice, Q_FiManBranch) = 11.1043 cm^2
# How do we decide the number of slots and their spacing? We don't have an A.FiManSlot
L_FiManSlotTotal := A_FiOrifices/(.2 mm) = 5.55217 m
ND_FiManBranch = 1 in
π*innerD(ND_FiManBranch, EN_PipeSpec) = 9.37608 cm
L_FiManSlot := π*innerD(ND_FiManBranch, EN_PipeSpec)/4 = 2.34402 cm  # This is for 1 slot on either side of the pipe each being 1/4 of the circumferance
S_FiBwManSlot := 2*L_FiManSlot/(L_FiManSlotTotal/W_FiActive) = 8.37384 mm
# Pressure recovery dominates the design. The constraint on the manifolds is that the pressure recovery term must be small relative to the head loss through the filter bed.
ND_FiTrunk := NominalDiameter(ID_Manifold(2*Q_FiLayer, HL_FiManifoldTarget), EN_PipeSpec) = 6 in
# The ID.Manifold function calculates an ID given the HL constraint, in this case the pressure recovery.
HL_FiTrunk := 1/3*h_l(Q_Fi, innerD(ND_FiTrunk, EN_PipeSpec), L_Fi, 0, Nu_Water, E_Pvc) = 1.06849 mm
V_Trunk := 2*Q_FiLayer/(innerdiameter(ND_FiTrunk, EN_PipeSpec)^2/4*π) = 0.426675 m/s  # Just checking our initial constraint on V.
ND_FiBwTrunk := NominalDiameter(ID_Manifold(Q_Fi, HL_FiManifoldTarget), EN_PipeSpec) = 8 in
HL_FiBwTrunk := 1/3*h_l(Q_Fi, innerD(ND_FiBwTrunk, EN_PipeSpec), L_Fi, 0, Nu_Water, E_Pvc) = 0.285491 mm
outerdiameter(ND_FiTrunk)/T_FiLayer = 0.841375
# As long as this is less than 1 there is enough room for exit and entrance trunk lines in the same wall.  This isn't a concern during filtration because the flow path through this sand is longer.  There aren't any slots on the trunk lines.
# Total head loss in the inlet plumbing for filtration and Bw
# This is for one of the middle manifolds embedded in sand and the length of the pipe outside the filter box is approximated at 2 m;  there are 4 90 deg elbows
HL_FiInletPlumbing := h_l(2*Q_FiLayer, innerD(ND_FiTrunk, EN_PipeSpec), 2 m, K_El90 + K_PipeEnt, Nu_Water, E_Pvc) + HL_FiTrunk + HL_FiManBranch = 3.54668 cm
HL_FiBwInletPlumbing := h_l(Q_Fi, innerD(ND_FiBwTrunk, EN_PipeSpec), 2 m, K_El90 + K_PipeEnt, Nu_Water, E_Pvc) + HL_FiBwTrunk + HL_FiBwManBranch = 2.65448 cm
HL_FiOutletPlumbing := HL_FiInletPlumbing = 3.54668 cm
W_Fi := W_FiActive + OuterDiameterFittingPVC(ND_FiBwTrunk) + T_ConcreteMin + 5 cm
# Active filter area plus the diameter of the coupling in the wall plus a concrete min for the coupling to be in the wall plus 5 cm on the opposite side of the filter for the ledge that holds the man branches in place
# Calculate the Z of the backwash channel weir
# Calculate the head loss through the siphon during backwash
# AKA time to drain the filter box of the water above the fluidized bed
Ti_FiBwInitiation := 3 min
# Need a flow rate in order to determine HL through the siphon tube
#
# Siphon has to handle the entire flow into the filter plus drain the terminal head in Ti.FiBwInitiation.  This is a "hole in a bucket problem" so the average flow rate is half the max flow (hence the factor of 2).  The HL sum corresponds to the height of water that needs to be drained; this ignores HL in the siphon because we don't know it yet, but it should be small...
Q_FiSiphonDesign := Q_Fi + 2*A_Fi*(HL_FiBwInitiation + HL_FiBwInletPlumbing)/Ti_FiBwInitiation = 31.5702 L/s
# Minor losses for flow through the siphon; they will be much greater than major losses, making major losses negligible will dominate.
#
# 0.2 is from losses through the straight path of a T intersection
K_FiSiphon := 2*K_El90 + K_PipeExit + K_PipeEnt + 0.2 = 3.5
h_eFiSiphonGuess := 10 cm  # Maximum acceptable head loss through the siphon at SS; used to calculate a Diameter
D_FiSiphonGuess := nthroot(K_FiSiphon*8/(g*π^2)*Q_FiSiphonDesign^2/(HL_FiBwInitiation + HL_FiBwInletPlumbing), 4) = 0.115601 m
# Minor Loss Equation rearranged to solve for D, not necessarily an available pipe size
D_FiSiphonSSGuess := nthroot(K_FiSiphon*8/(g*π^2)*Q_Fi^2/h_eFiSiphonGuess, 4) = 0.142865 m
# This selects the more limiting case; appears it is SS
ND_FiSiphon := NominalPipeSize(max(D_FiSiphonGuess, D_FiSiphonSSGuess)) = 6 in
HL_FiSiphonMax := h_e(Q_FiSiphonDesign, innerD(ND_FiSiphon, EN_PipeSpec), K_FiSiphon) = 50.5926 cm  # Head loss through the siphon
HL_FiSiphonSS := h_e(Q_Fi, innerD(ND_FiSiphon, EN_PipeSpec), K_FiSiphon) = 7.30961 cm
# Calculate the head loss over the weirs
SF_Fi := 10 cm  # This is a safety factor used in many filter calculations
# We are making the exit and backwash weirs as long as the filter is wide because it is a convenient dimension for construction.
ND_DistPipe := D_pipeschedule(Q_Plant, EN_PipeSpec, 1 m, 100 m, Nu_Water, E_Pvc, 2) = 6 in
L_FiWeir := max(OuterDiameterFittingPVC(ND_FiBwTrunk) + OuterDiameterFittingPVC(ND_FiTrunk) + OuterDiameterFittingPVC(ND_DistPipe) + 5*T_ConcreteMin, W_HumanMin) = 0.854837 m
# This is used for entrance and exit weirs (not necessarily backwash)
HL_FiBwWeir := Headloss_weir(Q_FiSiphonDesign, L_FiWeir) = 7.33241 cm
# Head loss is actually less than this because the weir is longer.  We don;t know what that L is until after the BW box is designed, which is not done until Q.FiSiphonMax is known which requires HL over the weir....its circular
HL_FiWeir := Headloss_weir(Q_Fi, L_FiWeir) = 3.84753 cm  # This is true of the entrance and exit weirs
Z_FiEntranceWeir := Z_SedWeirExit - (H_Freefall + HL_FiWeir) = 1.4622 m  # This is the maximum water height in the entrance box
HL_FiBwWeir = 0.0733241 m
Z_FiBwWeir := Z_FiEntranceWeir - (SF_Fi + HL_FiBwInletPlumbing + HL_FiBwInitiation + HL_FiSiphonSS + HL_FiBwWeir) = -0.398762 m
# The safety factor is to help initiate BW
Z_FiBwWeir - Z_FiEntranceWeir = -1.86096 m
Q_FiSiphonMax := Q_pipetotal(innerD(ND_FiSiphon, EN_PipeSpec), Z_FiEntranceWeir - Z_FiBwWeir, 4 m, Nu_Water, E_Pvc, K_FiSiphon) = 56.809 L/s
# Calculate the height bottom of the filter box and its height
H_FiFluidizedBed := 1.3*H_FiSand  # Bed expands 30% when fluidized
Z_FiSiphonInlet := Z_FiBwWeir - SF_Fi = -0.498762 m
# Minimum length of the siphon that needs to be submerged in the filter box is set to the SF
Z_FiBottom := Z_FiSiphonInlet - H_FiFluidizedBed - SF_Fi = -2.15876 m
H_Fi := Z_FiEntranceWeir + H_PlantFreeboard - Z_FiBottom = 3.72096 m
Z_FiTop := Z_FiBottom + H_Fi = 1.5622 m
# Just done to verify that the H.Fi calculation is correct.  See the wiki for a picture.
H_FiCheck := H_FiFluidizedBed + 2.*SF_Fi + HL_FiBwInitiation + H_PlantFreeboard + SF_Fi + HL_FiBwInletPlumbing + HL_FiSiphonSS + HL_FiBwWeir = 3.72096 m
# Calculate the dimesions of the entrance box
Z_FiEntranceBottom := Z_FiEntranceWeir - (HL_FiBwInitiation - HL_FiBwSS) - 2*SF_Fi = 0.862203 m
# One SF for not sucking air into the backwash line the other is for 10 extra cm of extra head to initiate backwash
H_FiEntrance := Z_FiEntranceWeir - Z_FiEntranceBottom + H_PlantFreeboard = 0.7 m
Z_FiEntranceBottom + H_FiEntrance = 1.5622 m  # The entrance channel wall opposite and perpendicular the weir is the same height as the filter box
L_FiEntrance := L_FiWeir = 0.854837 m
# W.FiEntrance is calculated below (under the overflow box) because we need those dimensions first to ensure any "extra" space is allotted in the entrance box rather than the overflow box
ND_FiEntranceOverflow := D_pipeschedule(Q_Fi, EN_PipeSpec, 1 m, 1 m, Nu_Water, E_Pvc, 2) = 3 in
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# This will be the pipe layout in the entrance and exit boxes to allow for 2 90 degree elbows in  Pipes 2 and 3 coming from the entrance box (on the right)
# Calculate the dimensions of the overflow box
W_FiOverflow := 2*T_ConcreteMin + OuterDiameterFittingPVC(ND_DistPipe) = 0.28415 m
L_FiOverflow := L_FiEntrance
H_FiOverflow := H_FiEntrance
Z_FiOverflowBottom := Z_FiEntranceBottom
W_FiEntrance := (2*W_Fi + T_PlantWall - 2*T_PlantWall - W_FiOverflow)/2 = 1.1112 m
# How much does the filter bed over fluidize when the entrance box level lowers after backwash initiation?
H_FiFluidizedBedVariation := (HL_FiBwInitiation - HL_FiBwSS)*(W_FiEntrance^2 - 3*OuterDiameterFittingPVC(ND_FiTrunk)^2/4*π)/A_Fi = 0.423449 m
HL_FiBwInitiation - HL_FiBwSS = 0.4 m
HL_FiBwInletPlumbing = 0.0265448 m
Q_Ratio := sqrt((HL_FiBwInitiation - HL_FiBwSS)/HL_FiBwInletPlumbing) = 3.88186
# We will leave the bottom of these tanks at a low elevation (that we have calculated) and add pipe stubs as needed. We need to experiment with free fall in the backwash pipe and with the inevitable entrainment of air to see if that is a problem. There will be a tradeoff between air entrainment and fluidized bed expansion. We may want to include an air vent in the backwash pipe (T with vertical leg returning to above original water height to vent air).
# Calculate the dimensions of the exit box
Z_FiExitWeir := Z_FiEntranceWeir - (HL_FiTerminal + HL_FiInletPlumbing + HL_FiOutletPlumbing) = 0.939842 m
# This means the water evel in the entrance box will actually be 10 cm higher than we assumed in previous calculations to ensure BW initiation (aka we have a 10cm SF for BW initiation)
# The goal is to have water start overflowing from the entrance tank when the filter reaches terminal head loss
Z_SedWeirExit - Z_FiExitWeir = 0.660837 m  # This is the energy used to filter water
Z_FiEntranceWeir - Z_FiExitWeir = 0.522361 m  # Difference in heights for the Exit and Entrance weirs
Z_FiExitBottomMin := Z_FiBwWeir + HL_FiSiphonSS + (HL_FiBwSS*(H_FiFluidizedBed - T_FiLayer)/H_FiFluidizedBed) = 0.710027 m
# The first two terms determine the height of the water at BW SS.  The additonal terms claculates the additonal height to prevent the pressure in the lowest outlet pipe from causing bacwash water to flow into the exit box.
# We aren't using this because we want the bottoms of the entrance/exit boxes to be 1 slab.  If we were...this is a contraint based on minimizing consturction materials.  This is a consideration now that BW Initiation is not as high as it was.
Z_FiExitBottom := Z_FiEntranceBottom = 0.862203 m
ZW_FiExit := Z_FiExitWeir + HL_FiWeir = 0.978317 m
H_FiExit := ZW_FiExit - Z_FiExitBottom + H_PlantFreeboard = 0.216114 m
L_FiExit := L_FiEntrance = 0.854837 m
W_FiExit := W_FiEntrance = 1.1112 m
W_Fi + OuterDiameterFittingPVC(ND_FiBwTrunk) - (W_FiExit + .5*OuterDiameterFittingPVC(ND_DistPipe)) = 0.361538 m
# This is a check to make sure the  entrance/exit boxes in different filters did not overlap
# Calculate the dimensions of the backwash box
# Minimum height of water in the filter box during filtration
ZW_FiStart := Z_FiExitWeir + HL_FiOutletPlumbing + HL_FiCleanLayer + HL_FiWeir = 1.16521 m
# This is the center line of the pipe through the wall.  This is a maximum based on zero flow.
Z_FiSiphonCouplingMax := Z_FiExitWeir - outerdiameter(ND_FiSiphon)/2 = 0.855704 m
Z_FiSiphonCouplingMin := ((Z_FiTop - H_PlantFreeboard) + (Z_FiBottom + H_FiFluidizedBed + SF_Fi))/2 + outerdiameter(ND_FiSiphon)/2 = 0.565858 m
# This is based on the lab constraint that the height water above the pipe cannot be longer than the pipe inside the filter
Z_FiSiphonCoupling := Z_FiSiphonCouplingMax = 0.855704 m
# This is based on the constraint that we want the siphon to function at half flow rate (and it would actually work at zero flow as well).
Z_FiSiphonCouplingMax - Z_FiSiphonCouplingMin = 0.289846 m
H_FiBwWeir := Z_FiBwWeir - Z_FiBottom = 1.76 m
# We decided we could simultaneous make the box shallow and the pipe the shortest it could be by raising the bottom of the filter box.  In the event we want to change that constraint, this is the amount of room we have to play with.  For every cm we lower this, we lowert he other end 1 cm plus another 1.5cm to ensure air doesn't leak out.  We can use this to calculate a min
H_FiBw := H_FiBwWeir + H_PlantFreeboard = 1.86 m
Q_FiSiphonMax = 56.809 L/s  # Just for reference
ND_FiBwWeirDrain := D_pipeschedule(Q_FiSiphonMax, EN_PipeSpec, H_FiBwWeir, H_FiBwWeir, Nu_Water, E_Pvc, K_El90 + K_PipeEnt + K_PipeExit) = 6 in
# This means we are using a drain channel
ND_FiBwDrain := 3 in
# This is the addition of the two siphon pipes and the drain pipe for the backwash box
W_FiBw := OuterDiameterFittingPVC(ND_FiBwDrain) + 4*T_ConcreteMin + 2*OuterDiameterFittingPVC(ND_FiSiphon) = 0.6699 m
L_FiBw := max(2*outerdiameter(ND_FiSiphon) + SocketDepth(ND_FiSiphon) + 5 cm + CouplingLength(ND_FiSiphon) - T_PlantWall, W_HumanMin) = 0.54 m
# 5 cm is for exposed pipe, 1 of the diameters is for the elbow radius
Z_FiBwBottom := Z_FiBottom = -2.15876 m
Z_FiBwTop := Z_FiBwBottom + H_FiBw = -0.298762 m
# Calculate the dimensions of the backwash drain box
W_FiBwWeirDrain := W_FiBw = 0.6699 m
# Make sure the wall thickness for all walls in the BW Box are T.PlantWall, including the weir because the Weir wall goes all the way to the floor
L_FiBwWeirDrain := 2*T_ConcreteMin + OuterDiameterFittingPVC(ND_FiBwWeirDrain)
# This means the depth of the box will scale with flow so that water will flow more smoothly into the pipe leading to the drain channel
Z_FiBwWeirDrainBottom := Z_FiBwWeir - ND_FiBwWeirDrain = -0.551162 m
H_FiBwWeirDrain := Z_FiBwTop - Z_FiBwWeirDrainBottom = 0.2524 m
# Calculate the dimensions of the drain channel
Q_FiBwDrain := Q_FiSiphonMax = 56.809 L/s
W_FiOverflow + 2*T_SedWeir - 2*T_PlantWall = 0.08415 m
# This is the space between the pipes that are coming down from the entrance and exit boxes and it is tiny...
# Length will be calculated in AutoCAD because having the various origins of the tanks will be helpful for doing so
Pi_Channel := 2/3
# 2/3 as deep as it is wide to keep it narrow.  This can change still.
L_ChannelEst := 2 m
ΔH_Est := 5 cm
W_FiBwDrain := max(W_HorizChannelΠ(Q_FiSiphonMax, Pi_Channel, ΔH_Est, L_ChannelEst, Nu_Water, E_Concrete, 0), OuterDiameterFittingPVC(ND_FiBwWeirDrain)) = 0.344069 m
H_FiBwDrain := H_HorizChannel(Q_FiSiphonMax, W_FiBwDrain, ΔH_Est, L_ChannelEst, Nu_Water, E_Concrete, 0) + H_PlantFreeboard = 0.329388 m
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# Calculate the Z of the top of the pipe stubs in the entrance and exit boxes
ZW_FiStart = 1.16521 m
# We are going to set the top one to some level (20cm) below the min water level (at the beginning of filtration) and then have some distance (5 cm) in between them.
#
# For exit, all the pipes are going to be the same height, and we should reference the min height we calculated (and maybe deleted) before plus a SF.
Z_FiEntrancePipes :=
    for i ∈ 0 .. 3
        Z_FiEntrancePipes[0] ← ZW_FiStart - 20 cm if i == 0
        Z_FiEntrancePipes[i] ← Z_FiEntrancePipes[i - 1] - 5 cm otherwise
    return Z_FiEntrancePipes
    = [0.965212; 0.915212; 0.865212; 0.815212] m
# This may not be correct for the BW pipe which may need to be shorter, but Monore "really doesn't think so"
Z_FiExitPipes := [Z_FiExitWeir - 10 cm; Z_FiExitBottomMin; Z_FiExitWeir - 10 cm; Z_FiExitWeir - 10 cm] = [0.839842; 0.710027; 0.839842; 0.839842] m
# Calculate the Siphon Valve Size
# The available head is equal to the difference between the bottom of the siphon pipe and the steady state water level in the filter.  This is a head available in terms of water.
HL_FiSiphonValveWater := (Z_FiSiphonCoupling - ND_FiSiphon/2) - (Z_FiBwWeir + HL_FiSiphonSS) = 1.10517 m
rho_Water := 998.2*kg/m^3
rho_Air := 1.204*kg/m^3
HL_FiSiphonValveAir := HL_FiSiphonValveWater*rho_Water/rho_Air = 916.263 m  # This is the head available in terms of air.
K_FiSiphonValve := 2
# Entrance loses and ball valve losses
D_FiSiphonValveGuess := nthroot(K_FiSiphonValve*8/(g*π^2)*Q_FiSiphonDesign^2/HL_FiSiphonValveAir, 4) = 2.05925 cm
ND_FiSiphonValve := NominalPipeSize(D_FiSiphonValveGuess) = 1 in
# Piping and Fittings
# The last elbow for the backwash trunk line is replaced with a T.  The oppostie direction from the filter is a valve that goes to the waste channel in the event we want to dewater the filter without de-sanding it.
#
# The de-sanding pipe will be sized based on the volume of the fluidized bed being drained in under 5 minutes.  Predict a 3 in pipe
# There will be a tradeoff between air entrainment and fluidized bed expansion. We may want to include an air vent in the backwash pipe (T with vertical leg returning to above original water height to vent air).
