# [reference: BasicInputs.xmcd]
# [reference: ExpertInputs.xmcd]
# [reference: MathFunctions.xmcd]
# [reference: PipeDatabase.xmcd]
# [reference: MinorLossCoefficients.xmcd]
# [reference: FluidsFunctions.xmcd]
# Questions:
# - What is the minimum allowable space between the slopes of the walls and the side of the inlet manifold pipe to avoid floc breakup and have good sed tank hydraulics?
# Sedimentation Tank
# Preliminary Dimension and Flow Calculations
# Maximum length of the upflow section of the sed tank is based on the maximum flow rate through the inlet manifold pipe to stay below the maximum energy dissipation rate to prevent floc breakup and the desired upflow velocity to maintain a floc blanket.
L_SedUpflowMax := Q_PipeED(ED_SedInlet, innerD(ND_SedManifoldMax, PS_Default), Pi_VenaContractaOrifice, Pi_Jet)/(V_SedUpBod*W_SedBay)
Q_Sed := Q_Plant/N_SedTanks = 0.003 m^3/s  # Flow rate through one sed tank.
# There is a minimum number of total sed bays required to maintain the desired upflow velocity in each sed tank given the maximum length calculated above.
N_SedBaysTotal := ceil(Q_Plant/(V_SedUpBod*W_SedBay*L_SedUpflowMax)) = 1
N_SedBaysMin := ceil(N_SedBaysTotal/N_SedTanks) = 1  # Minimum number of sed bays per sed tank given the minimum total number calculated above.
N_SedBays := max(N_SedBaysMin, N_SedBaysEst) = 1  # The number of bays per tank is the maximum of the calculated value and the user input
L_SedUpflow := Q_Sed/(W_SedBay*N_SedBays*V_SedUpBod)
# Actual length of the upflow section of the sed tank (not including the floc hopper) given the number of sed bays per sed tank.
W_Sed := N_SedBays*W_SedBay
Q_SedBay := Q_Sed/N_SedBays
ND_SedLaunder := ND_Manifold(Q_SedBay, HL_SedLaunderBod, L_SedUpflow, Pi_QLaunderOrifices, PS_Default, Nu_Water, E_Pvc, K_PipeExit, 2*floor(L_SedUpflow/B_SedLaunderOrificesEst))
# This is a very slightly conservative estimate on the size of the launder. Close enough that there is no need to recalcualte this diameter.
Q_SedManifold := Q_SedBay  # There is one manifold per bay
ND_SedManifold := NominalDiameter(D_PipeED(ED_SedInlet, Q_SedBay, Pi_VenaContractaOrifice, Pi_Jet), PS_Default)
# Inlet Channel Design
L_Channel := N_SedTanks*W_Sed + (N_SedTanks + 1)*T_PlantWall  # Length of the inlet channel, which runs along the entire width of the sed tanks.
# The area of the inlet channel must be large enough not to break up flocs
A_InletChannelED := A_Channel(Q_Plant, ED_SedInlet, Pi_VenaContractaOrifice, Pi_Jet)
HW_SedWeirExit := 2*ConRadius(ND_SedLaunder)
W_InletChannelPlumbing := 2*ConRadius(ND_SedManifold) + 2*S_SedInletChannelMin = 0.24415 m
HW_InletChannelPlumbing := HL_SedLaunderBod + 2*ConRadius(ND_SedLaunder) + T_ConcreteMin = 0.218587 m
[W_InletChannelPreWeir; HW_SedInletChannel] :=
    W ← W_InletChannelPlumbing
    HW ← HW_InletChannelPlumbing
    while W*HW < A_InletChannelED
        HW ← HW + 1 mm if HW < W
        W ← W + 1 mm otherwise
    return [W; HW]
H_SedInletChannel := HW_SedInletChannel + H_PlantFreeboard
EN_InletChannelGeom :=
    hl_weir ← Headloss_weir(Q_Plant, W_InletChannelPreWeir)
    Geom_Channel ← Perpendicular_Weir if (hl_weir ≤ HL_SedWeirMax)
    Geom_Channel ← Parallel_Weir otherwise
    return Geom_Channel
# This function determines the geometry of the weir based on the headloss through it. Hl.SedWeirMax is an expert input. 0-->Perpendicular, 1--> Parallel
W_SedWeirInlet :=
    W_InletChannelPreWeir if EN_InletChannelGeom == Perpendicular_Weir
    L_Channel otherwise
HL_SedWeirInlet := Headloss_weir(Q_Plant, W_SedWeirInlet) = 0.0117426 m
H_SedWeirInlet := HW_SedInletChannel + 2 cm = 0.275588 m
W_InletChannelPostWeir := max(W_ChannelMin, W_HorizChannel(Q_Plant, H_SedWeirInlet, HL_SedChannelMax, L_Channel, Nu_Water, E_Concrete, 1))
W_SedInletChannel :=
    W_InletChannelPreWeir if EN_InletChannelGeom == Perpendicular_Weir
    W_InletChannelPreWeir + T_SedWeir + W_InletChannelPostWeir if EN_InletChannelGeom == Parallel_Weir
V_SedInletChannel := Q_Plant/(W_InletChannelPreWeir*HW_SedInletChannel) = 0.184012 m/s  # This is the velocity in the part of the channel that delivers the flocs
L_SedEst := 4 m
ND_SedInletChannelDrain := NominalDiameter(D_PipeTotal(Q_Plant, HW_SedEst, HW_SedEst + L_SedEst, Nu_Water, E_Pvc, K_PipeEnt + K_PipeExit + K_El90), PS_Default) = 3 in
W_SedInletChannelDrainBox := max(2*S_Fitting + 2*ConRadius(ND_SedInletChannelDrain), W_InletChannelPostWeir)
# Exit Channel Design
ND_SedExitChannelDrain := NominalDiameter(D_PipeTotal(Q_Plant, HW_SedEst, HW_SedEst, Nu_Water, E_Pvc, K_PipeEnt + K_PipeExit + K_El90), PS_Default) = 3 in
L_ExitChannel := L_Channel
H_SedExitChannel := H_SedInletChannel
HW_SedExitChannel := HW_SedInletChannel - HL_SedLaunderBod
W_ExitChannelPreWeir := max(W_HorizChannel(Q_Plant, HW_SedExitChannel, HL_SedChannelMax, L_Channel, Nu_Water, E_Concrete, 1), W_ChannelMin)
W_ExitChannelPostWeir := max(W_ChannelMin, W_HorizChannel(Q_Plant, H_SedWeirInlet, HL_SedChannelMax, L_Channel, Nu_Water, E_Concrete, 1))
Geom_ExitChannel :=
    hl_perpweir ← Headloss_weir(Q_Plant, max(W_ExitChannelPreWeir, 2*S_Fitting + 2*ConRadius(ND_SedExitChannelDrain)))
    Geom_Channel ← Perpendicular_Weir if (hl_perpweir ≤ HL_SedWeirMax)
    Geom_Channel ← Parallel_Weir otherwise
    return Geom_Channel
W_SedWeirExit :=
    max(W_ExitChannelPreWeir, 2*S_Fitting + 2*ConRadius(ND_SedExitChannelDrain)) if Geom_ExitChannel == Perpendicular_Weir
    L_Channel - 2*S_Fitting - 2*ConRadius(ND_SedExitChannelDrain) + W_ExitChannelPostWeir otherwise
HL_SedWeirExit := Headloss_weir(Q_Plant, W_SedWeirExit)
H_SedWeirExit := HW_SedExitChannel - HL_SedWeirExit
W_SedExitChannel :=
    max(W_ExitChannelPreWeir, 2*S_Fitting + 2*ConRadius(ND_SedExitChannelDrain)) if Geom_ExitChannel == Perpendicular_Weir
    max(W_ExitChannelPreWeir + T_SedWeir + W_ExitChannelPostWeir, 2*S_Fitting + 2*ConRadius(ND_SedExitChannelDrain)) otherwise
H_ExitChannelLaunder := H_SedWeirExit - outerdiameter(ND_SedLaunder)
# Manifold Design
L_SedManifoldPipe := L_SedUpflow - S_Fitting - ConRadius(ND_SedManifold) - ElbowRadius(ND_SedManifold) - CapHeight(ND_SedManifold) + SocketDepth(ND_SedManifold)
[
    B_SedManifoldPort;
    N_SedManifoldPortUnits;
    Q_SedManifoldPortUnits;
    D_SedManifoldPort;
    ND_SedManifoldDiffuser;
    W_SedDiffuserOutlet;
    L_SedDiffuserOutlet;
    S_SedDiffuser
] :=
    B_Ports ← B_SedManifoldPortEst
    N_Ports ← floor(L_SedManifoldPipe/B_Ports) - 1
    Q_Ports ← Q_SedBay/N_Ports
    D_Ports ← CeilNearest(D_PipeED(ED_SedInlet, Q_Ports, Pi_VenaContractaOrifice, Pi_Jet), D_Drill)
    ND_Diffuser ← NominalDiameter(D_Ports + 0.5 in, PS_Default)
    Circ_Diffuser ← π*innerdiameter(ND_Diffuser, PS_Default)
    W_DiffuserOutlet ← min(Circ_Diffuser/4, 2/Pi_VenaContractaOrifice^2*((Pi_Jet*Q_Ports/(2*B_Ports))^3/ED_Floc)^(1/4))
    L_DiffuserOutlet ← (Circ_Diffuser - 2*W_DiffuserOutlet)/2
    S_Diffusers ← B_Ports - L_DiffuserOutlet - 2*(outerradius(ND_Diffuser) - innerdiameter(ND_Diffuser, PS_Default)/2)
    while S_Diffusers > 0 m
        B_Ports ← B_Ports - 1 mm
        N_Ports ← floor(L_SedManifoldPipe/B_Ports) - 1
        Q_Ports ← Q_SedBay/N_Ports
        D_Ports ← CeilNearest(D_PipeED(ED_SedInlet, Q_Ports, Pi_VenaContractaOrifice, Pi_Jet), D_Drill)
        ND_Diffuser ← NominalDiameter(D_Ports + 0.5 in, PS_Default)
        Circ_Diffuser ← π*innerdiameter(ND_Diffuser, PS_Default)
        W_DiffuserOutlet ← min(Circ_Diffuser, 2/Pi_VenaContractaOrifice^2*((Pi_Jet*Q_Ports/(2*B_Ports))^3/ED_Floc)^(1/4))
        L_DiffuserOutlet ← (Circ_Diffuser - 2*W_DiffuserOutlet)/2
        S_Diffusers ← B_Ports - L_DiffuserOutlet - 2*(outerradius(ND_Diffuser) - innerdiameter(ND_Diffuser, PS_Default)/2)
        break if B_Ports ≤ Circ_Diffuser/4 + 2*(outerradius(ND_Diffuser) - innerdiameter(ND_Diffuser, PS_Default)/2) + 0.5 cm
    return [
        B_Ports;
        N_Ports*m;
        Q_Ports*m/(m^3/s);
        D_Ports;
        ND_Diffuser;
        W_DiffuserOutlet;
        L_DiffuserOutlet;
        S_Diffusers
    ]
N_SedManifoldPort := N_SedManifoldPortUnits/m
Q_SedManifoldPort := Q_SedManifoldPortUnits*m^3/s/m
B_SedManifoldPort = 4.6 cm
S_SedDiffuser = -0.0219329 cm
ND_SedManifoldDiffuser = 1.5 in
innerdiameter(ND_SedManifoldDiffuser, PS_Default) = 4.40436 cm
L_SedDiffuserOutlet = 4.20029 cm
W_SedDiffuserOutlet = 2.71806 cm
S_ReversedHalfJet := (outerdiameter(ND_SedManifoldDiffuser) - W_SedDiffuserOutlet)/2 = 1.05397 cm
W_Jet := W_SedDiffuserOutlet/2*Pi_VenaContractaOrifice^2 = 0.539399 cm
A_SedManifoldPort := A_circle(D_SedManifoldPort)
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L_SedManifoldDiffuserEst := 4*innerdiameter(ND_SedManifoldDiffuser, PS_Default) = 0.176174 m
B_SedManifoldPort = 46 mm
D_SedManifoldPort = 2.6 cm
outerdiameter(ND_SedManifoldDiffuser) = 4.826 cm
W_Port := 2/Pi_VenaContractaOrifice^2*((Pi_Jet*Q_SedManifoldPort/(2*B_SedManifoldPort))^3/ED_Floc)^(1/4) = 2.71806 cm
# Calculate the energy dissipation rate created by the port. We will use this to evaluate this design.
ED_SedManifoldPort := ED_Port(Q_SedManifoldPort, D_SedManifoldPort, Pi_VenaContractaOrifice)
# End Slope
L_SedEndSlope := S_Fitting + ConRadius(ND_SedManifold) + ElbowRadius(ND_SedManifold) + SocketDepth(ND_SedManifold)
H_SedEndSlope := tan(AN_SedSlope)*L_SedEndSlope
# Sludge Drain
# This is the initial drain rate
# The factor of two is because the flow rate decreases linearly as the tank drain (for a constant cross section tank). Thus the average drain rate is 1/2 the initial drain rate.
Q_SedSludgeDrain := 2*W_SedBay*L_SedUpflow*HW_SedEst/Ti_SludgeDrain
# There will be a drain orifice in between each manifold port
B_SedSludgeOrifices := B_SedManifoldPort
N_SedSludgeOrificesEst := floor((L_SedUpflow - L_SedEndSlope)/B_SedSludgeOrifices) - 1 = 65
Q_SedSludgeOrificesEst := Q_SedSludgeDrain/N_SedSludgeOrificesEst
L_FlocHopperEst := 1 m
# This is the required diameter of the sludge drain if it were circular
# To get the effective "diameter" of the sludge drain manifold (the cross section will actually be a polygon) an approximate length for the portion of the sludge drain which runs under the floc hopper is assumed to be 1m and is entered in the manifold function as if its section had inlet holes as well. Since the effect of the additional length on the calculated "diameter" is very small, the accuracy of these assumptions is not very important.
D_SedSludgeChannel := D_Manifold(Q_SedSludgeDrain, HW_SedEst/3, L_SedUpflow - L_SedEndSlope, Pi_QSludgeOrifices, Nu_Water, E_Concrete, 0, N_SedSludgeOrificesEst) = 0.0844919 m
ND_SedSludgePipe := NominalDiameter(D_PipeTotal(Q_SedSludgeDrain, HW_SedEst/3, L_SedUpflow - L_SedEndSlope + L_FlocHopperEst, Nu_Water, E_Pvc, K_PipeExit + K_GateValve), PS_Default) = 0.0762 m
# Something is wrong with these diameter functions.
HL_SedSludgeEst := HL_Manifold(Q_SedSludgeDrain, D_SedSludgeChannel, L_SedUpflow + L_FlocHopperEst, 0, Nu_Water, E_Concrete, N_SedSludgeOrificesEst) + h_l(Q_SedSludgeDrain, innerdiameter(ND_SedSludgePipe, PS_Default), L_FlocHopperEst + ValveLength(ND_SedSludgePipe) + 10 cm, K_GateValve + K_PipeExit, Nu_Water, E_Pvc)
HL_SedSludgeOrificeEst := HW_SedEst - HL_SedSludgeEst = 1.66779 m
D_SedSludgeOrifice := RoundNearest(D_circle(A_orifice(HL_SedSludgeOrificeEst, Pi_VenaContractaOrifice, Q_SedSludgeOrificesEst)), D_Drill)
# The cross sectional area of the drain if it were circular
A_SedSludge := π/4*D_SedSludgeChannel^2
# Assume sludge drain is twice as wide as it is high (to save depth in the sed tank)
W_SedSludge := sqrt(2*A_SedSludge)
H_SedSludge := A_SedSludge/W_SedSludge
Z_SedSludge := H_SedSludge = 0.0529474 m  # Elevation of the top of the sludge drain channel (and the bottom of the drain cover).
# Sludge Drain Cover
# The jet reverser is the semi-circular trough in the center of the drain cover into which the jets from the inlet manifold discharge and re-suspend sludge. The concrete semi-circle will be cast using a length of PVC pipe.
#
# For now we have set the diameter of the semi-circle to the diameter of the manifold diffusers so that it will be scaled with jet flow rate, but this should be based on the requirements for good floc re-suspension.
ND_SedJetReverser := ND_SedManifoldDiffuser
# The drain cover needs to be wide enough to rest on the ledges of the drain channel, and also needs to be at least as wide as the jet reverser.
W_SedDrainCover := max(W_SedSludge + 2*T_ConcreteMin, ND_SedJetReverser) = 8.1061 in
L_SedDrainCoverSlopes := (W_SedDrainCover - outerdiameter(ND_SedJetReverser))/2
H_SedDrainCoverTotal := T_ConcreteMin + outerradius(ND_SedJetReverser) + L_SedDrainCoverSlopes*tan(AN_SedSlope) = 8.29314 in
A_SedDrainCover := H_SedDrainCoverTotal*W_SedDrainCover - L_SedDrainCoverSlopes*tan(AN_SedSlope)*(2*L_SedDrainCoverSlopes + outerdiameter(ND_SedJetReverser)) - 1/2*π*outerradius(ND_SedJetReverser)^2
ρ_Concrete := 2400*kg/m^3
M_DrainCoverMax := 20 kg
S_SedDrainCoverSegment := 0.5 cm
L_SedDrainCoverTotal := L_SedUpflow - L_SedEndSlope
L_SedDrainCoverSegment :=
    N ← 1
    L ← (L_SedDrainCoverTotal - (N - 1)*S_SedDrainCoverSegment)/N
    while A_SedDrainCover*L*ρ_Concrete > M_DrainCoverMax
        N ← N + 1
        L ← (L_SedDrainCoverTotal - (N - 1)*S_SedDrainCoverSegment)/N
    return L
N_SedDrainCoverSegment := floor(L_SedDrainCoverTotal/L_SedDrainCoverSegment)
N_SedSludgeOrificesSegment := floor(L_SedDrainCoverSegment/B_SedSludgeOrifices) = 10
N_SedSludgeOrifices := N_SedSludgeOrificesSegment*N_SedDrainCoverSegment
# Side Slopes
W_SedSideSlopes := (W_SedBay - W_SedDrainCover)/2
H_SedSideSlopes := tan(AN_SedSlope)*((W_SedBay - outerdiameter(ND_SedJetReverser))/2 - T_ConcreteMin) = 0.806911 m
# Manifold Vertical Position
S_SedManToSlopeMin := 10 cm
H_SedManifoldLift := max(L_SedManifoldDiffuserEst, ConRadius(ND_SedManifold) - outerradius(ND_SedManifold), (outerradius(ND_SedManifold) + S_SedManToSlopeMin)/cos(AN_SedSlope) - outerradius(ND_SedManifold) - outerradius(ND_SedJetReverser)*tan(AN_SedSlope), ConRadius(ND_SedManifold)/cos(AN_SedSlope) - ConRadius(ND_SedManifold) - outerradius(ND_SedJetReverser)*tan(AN_SedSlope), (ElbowRadius(ND_SedManifold) + ConRadius(ND_SedManifold))/cos(AN_SedSlope) - ElbowRadius(ND_SedManifold) - outerradius(ND_SedManifold))
Z_SedManifoldPipe := Z_SedSludge + T_ConcreteMin + outerradius(ND_SedJetReverser) + outerradius(ND_SedManifold) + H_SedManifoldLift
L_SedManifoldDiffuser := H_SedManifoldLift
# Lamella Design and Tank Dimension Algorithm
B_SedPlate := B_SedPlateMin
N_SedModulePlatesMax := floor(L_SedPlateCantilevered/B_SedPlate*tan(AN_SedPlate)) = 12
N_SedModulePlatesMin := 8
index2(s, array) :=
    i ← 0
    while s ≠ array[i] and i < last(array)
        i ← i + 1
    return i
PlateIndex :=
    for j ∈ N_SedModulePlatesMin .. N_SedModulePlatesMax
        for i ∈ 0 .. 50
            matrix[i, j - N_SedModulePlatesMin] ← j*(i + 1)
    array ← matrix[:, 0]
    for j ∈ N_SedModulePlatesMin + 1 .. N_SedModulePlatesMax
        array ← stack(array, matrix[:, j - N_SedModulePlatesMin])
    array ← sort(array)
    i ← 0
    while i < (last(array) - 1)
        array ← stack(submatrix(array, 0, i, 0, 0), submatrix(array, i + 2, last(array), 0, 0)) if array[i] == array[i + 1]
        array ← submatrix(array, 0, i + 1, 0, 0) if (i + 1 == i + 2 and i + 2 == last(array))
        i ← i + 1
    return array
H_SedFlocWeir := 80 cm  # The vertical distance from the top lip of the jet reverser to the floc weir.
H_ManifoldToFlocWeir := 10 cm
H_FlocWeirToLamella := 10 cm  # Vertical distance from the top of the floc weir to the bottom of the plate pipe frame.
H_LamellaToLaunder := 5 cm  # Vertical distance from the top of the plate settlers to the bottom of the exit launder.
Z_LamellaBottom := Z_SedSludge + H_SedFlocWeir + H_FlocWeirToLamella + outerdiameter(ND_SedPlateFrame) = 1.00121 m
# The following is the minimum possible vertical distance from the bottom of the plates themselves to the bottom of the outside walls of the channels.
H_LamellaToChannelInitial := max(Z_SedManifoldPipe + ElbowRadius(ND_SedManifold) + SocketDepth(ND_SedManifold) + CouplingLength(ND_SedManifold) - T_ChannelWall - Z_LamellaBottom, 0 m)
[L_SedPlateEst; N_SedPlatesUnits; H_LamellaToChannelEst; L_WeirToEChanEst; V_SedCaptureUnits] :=
    H_LamToChan ← H_LamellaToChannelInitial
    V_c ← 100*mm/s
    L_PlateChanGap ← 1 m
    N_Plates ← 0 m
    L_Plate ← 0 m
    while V_c > V_SedCBod
        H_LamToChan ← H_LamToChan + 1 cm
        L_Plate ← (H_LamToChan + T_ChannelWall + H_ExitChannelLaunder - H_LamellaToLaunder - 2*T_SedPlate/2*cos(AN_SedPlate))/sin(AN_SedPlate)
        L_WeirToEChan ← L_Plate*cos(AN_SedPlate) + T_SedPlate/2*cos(AN_SedPlate)
        L_PlateArea ← L_SedUpflow - W_SedInletChannel - T_ChannelWall + H_LamToChan/tan(AN_SedPlate)
        N_Plates ← FloorNearest(L_PlateArea/B_SedPlate + 1, PlateIndex)*m
        V_c ← (Q_SedBay/(W_SedBay*N_Plates/m))/(B_SedPlate + L_Plate*sin(AN_SedPlate)*cos(AN_SedPlate) - T_SedPlate)
    return [L_Plate; N_Plates; H_LamToChan; L_WeirToEChan; V_c*s]
V_SedCapture := V_SedCaptureUnits/s
N_SedPlates := N_SedPlatesUnits/m
L_SedPlateEst = 0.425375 m
N_PlatesPerSheet := floor(L_SedPlateSheet/L_SedPlateEst) = 8
W_ExitChannelPreWeir = 10 cm
L_SedPlate := L_SedPlateSheet/N_PlatesPerSheet = 0.45725 m
2*ConRadius(6 in) + 2*S_Fitting = 0.28415 m
Z_SedChannelBottom := Z_LamellaBottom + L_SedPlate*sin(AN_SedPlate) + 2*T_SedPlate/2*cos(AN_SedPlate) + H_LamellaToLaunder - H_ExitChannelLaunder = 1.35881 m
L_PlateChannelGap := L_SedUpflow + T_SedPlate/2*sin(AN_SedPlate) - W_SedInletChannel - T_ChannelWall - (N_SedPlates - 1)*B_SedPlate - T_SedPlate/sin(AN_SedPlate) + (Z_SedChannelBottom - T_ChannelWall - Z_LamellaBottom)/tan(AN_SedPlate)
L_WeirToEChan := L_WeirToEChanEst - L_PlateChannelGap
N_SedPlates = 112
L_SedPlate = 45.725 cm
L_WeirToEChan = 0.174698 m
V_SedCapture = 0.118559 mm/s
V_SedCBod = 0.12 mm/s
N_SedPlateModules :=
    for i ∈ N_SedModulePlatesMin .. N_SedModulePlatesMax
        N ← N_SedPlates/i
        break if mod(N_SedPlates, i) == 0
    return N
H_Sed := Z_SedChannelBottom + H_SedInletChannel = 1.7144 m
# Exit Launder
B_SedLaunderOrifices := B_SedLaunderOrificesEst
Z_SedLaunder := Z_SedChannelBottom + H_SedWeirExit - outerradius(ND_SedLaunder) = 1.50535 m
L_SedLaunder := L_SedUpflow + L_WeirToEChan - W_SedInletChannel - T_ChannelWall + T_ChannelWall - CouplingLength(ND_SedLaunder) - CouplingLengthFlex(ND_SedLaunder) + SocketDepthFlex(ND_SedLaunder) - CapHeight(ND_SedLaunder) + SocketDepth(ND_SedLaunder)
# There will be two orifices per row along the active length of the launder
N_SedLaunderOrifices := 2*floor((L_SedLaunder - SocketDepth(ND_SedManifold) - SocketDepthFlex(ND_SedManifold))/B_SedLaunderOrifices) = 58
Q_SedLaunderOrifices := Q_SedBay/N_SedLaunderOrifices
# This the HL due to major & minor losses loses through the manifold.
HL_SedLaunderMajor := HL_Manifold(Q_SedBay, innerdiameter(ND_SedLaunder, PS_Default), L_SedLaunder, 0, Nu_Water, E_Pvc, N_SedLaunderOrifices)
HL_SedLaunderOrificeEst := HL_SedLaunderBod - HL_SedLaunderMajor = 0.0384383 m
D_SedLaunderOrifice := RoundNearest(D_circle(A_orifice(HL_SedLaunderOrificeEst, Pi_VenaContractaOrifice, Q_SedLaunderOrifices)), D_Drill) = 1.1 cm
# This is the total headloss through the launder based on the actual diameter of the orifices
HL_SedLaunderOrifice := h_orifice(D_SedLaunderOrifice, Pi_VenaContractaOrifice, Q_SedLaunderOrifices) = 3.80543 cm
HW_Sed := Z_SedLaunder + outerradius(ND_SedLaunder) + HL_SedLaunderOrifice = 1.60055 m
# The size of the opening in the cap to allow the inflow of water into the sedimentation tank during refill is determined by the Orifice Equation Q=A*K*(2*g*h)^.5 so that the flow rate through the cap is at most the flow rate out of the other sedimentation tanks.
HW_LaunderCap := HL_SedWeirExit + outerradius(ND_SedLaunder)
A_LaunderCapOrifice := Q_SedBay/(Pi_VenaContractaOrifice*sqrt(2*g*HW_LaunderCap)) = 40.9182 cm^2
D_CapOrifice := RoundNearest(D_circle(A_orifice(h_orifice(sqrt(A_LaunderCapOrifice/(π/4)), Pi_VenaContractaOrifice, Q_SedBay), Pi_VenaContractaOrifice, Q_SedBay)), D_Drill) = 5 cm
L_LaunderCouplingPipe := SocketDepth(ND_SedLaunder) + CapHeight(ND_SedLaunder)
# Floc Weir, Hopper, and Hopper Drain
L_SedHopper := L_WeirToEChan - T_ConcreteMin + T_ChannelWall + W_SedExitChannel = 0.524698 m
ND_SedHopperDrain := 1 in
L_SedHopperFrontSlope := min((H_SedFlocWeir - ElbowRadius(ND_SedHopperDrain))/tan(AN_SedSlope), L_SedHopper)
H_SedHopperFrontSlope := L_SedHopperFrontSlope*tan(AN_SedSlope)
Z_SedHopperBottom := Z_SedSludge + H_SedFlocWeir - H_SedHopperFrontSlope = 9.10474 cm
H_SedHopperBackSlope := min((L_SedHopper - L_SedHopperFrontSlope)*tan(AN_SedSlope), Z_SedChannelBottom - Z_SedHopperBottom)
L_SedHopperBackSlope := H_SedHopperBackSlope/tan(AN_SedSlope)
L_SedHopperExcess := L_SedHopper - L_SedHopperFrontSlope - L_SedHopperBackSlope = -1.38778e-17 m
Q_SedHopperDrainMax := Q_pipetotal(innerdiameter(ND_SedHopperDrain, PS_Default), HW_Sed - Z_SedHopperBottom, L_SedHopper - L_SedHopperFrontSlope + max(CouplingLength(ND_SedHopperDrain), T_PlantWall) + ValveLength(ND_SedHopperDrain) + π/4*ElbowRadius(ND_SedHopperDrain), Nu_Water, E_Pvc, K_PipeEnt + K_PipeExit + K_GateValve) = 2.58035 L/s
L_SedHopperDrainPipe := L_SedHopper - L_SedHopperFrontSlope + SocketDepth(ND_SedHopperDrain)
# Total Length
L_Sed := L_SedUpflow + T_ConcreteMin + L_SedHopper = 4.04692 m
