# Sed Tank Functions
# Calculate number of Sed Tanks
Q_SedManifoldMax := Q_PipeED(ED_SedInlet, innerdiameter(ND_SedManifoldMax, PS_Default), Pi_VenaContractaOrifice, Pi_Jet)
Q_SedManifoldMin := Q_PipeED(ED_SedInlet, innerdiameter(ND_SedManifoldMin, PS_Default), Pi_VenaContractaOrifice, Pi_Jet)
fN_SedTanks(Q_Plant) := max(min(ceil(Q_Plant/Q_PipeED(ED_SedInlet, innerdiameter(ND_SedManifoldMin, PS_Default), Pi_VenaContractaOrifice, Pi_Jet)), N_SedTanksMin), ceil(Q_Plant/(2*Q_PipeED(ED_SedInlet, innerdiameter(ND_SedManifoldMax, PS_Default), Pi_VenaContractaOrifice, Pi_Jet))))
# Sed Bay and Preliminary calculations
fQ_Sed(Q_Plant) := Q_Plant/fN_SedTanks(Q_Plant)
fL_SedUpflowMax := Q_SedManifoldMax/(V_SedUpBod*W_SedBay)
fN_SedBaysTotal(Q_Plant) := ceil(Q_Plant/(V_SedUpBod*W_SedBay*fL_SedUpflowMax))
fN_SedBaysMin(Q_Plant) := ceil(ceil(Q_Plant/(V_SedUpBod*W_SedBay*fL_SedUpflowMax))/fN_SedTanks(Q_Plant))
fN_SedBaysEst(Q_Plant) := min(ceil(Q_Plant/(ceil(ceil(Q_Plant/(V_SedUpBod*W_SedBay*fL_SedUpflowMax))/fN_SedTanks(Q_Plant))*Q_SedManifoldMax)), 2)
fN_SedBays(Q_Plant) := max(fN_SedBaysMin(Q_Plant), fN_SedBaysEst(Q_Plant))
fW_Sed(Q_Plant) := fN_SedBays(Q_Plant)*W_SedBay
fQ_SedBay(Q_Plant) := Q_Plant/fN_SedTanks(Q_Plant)/fN_SedBays(Q_Plant)
fND_SedManifold(Q_Plant) := NominalDiameter(D_PipeED(ED_SedInlet, fQ_SedBay(Q_Plant), Pi_VenaContractaOrifice, Pi_Jet), PS_Default)
fL_SedUpflowEst(Q_Plant) := fQ_SedBay(Q_Plant)/(W_SedBay*V_SedUpBod)
fND_SedLaunder(Q_Plant) := ND_Manifold(fQ_SedBay(Q_Plant), HL_SedLaunderBod, fL_SedUpflowEst(Q_Plant), Pi_QLaunderOrifices, PS_Default, Nu_Water, E_Pvc, K_PipeExit, 2*floor(fL_SedUpflowEst(Q_Plant)/B_SedLaunderOrificesEst))
# Inlet Channel calculations
fL_SedChannel(Q_Plant) := fN_SedTanks(Q_Plant)*fW_Sed(Q_Plant) + (fN_SedTanks(Q_Plant) - 1)*T_SedWallDivider + T_PlantWall - T_SedWallDivider
fHL_SedWeirExit(Q_Plant) := Headloss_weir(Q_Plant, fL_SedChannel(Q_Plant))
fA_SedInletChannelED(Q_Plant) := A_Channel(Q_Plant, ED_SedInlet, Pi_VenaContractaOrifice, Pi_Jet)
fW_SedInletChannelPlumbing(Q_Plant) := 2*ConRadius(fND_SedManifold(Q_Plant)) + 2*S_Fitting
fHW_SedInletChannelPlumbing(Q_Plant) := HL_SedLaunderBod + 2*ConRadius(fND_SedLaunder(Q_Plant)) + S_Fitting + fHL_SedWeirExit(Q_Plant)
fW_SedInletChannelPreWeir(Q_Plant) :=
    W ← fW_SedInletChannelPlumbing(Q_Plant)
    HW ← fHW_SedInletChannelPlumbing(Q_Plant)
    while W*HW < fA_SedInletChannelED(Q_Plant)
        HW ← HW + 1 mm if HW < W
        W ← W + 1 mm otherwise
    return W
fHW_SedInletChannel(Q_Plant) :=
    W ← fW_SedInletChannelPlumbing(Q_Plant)
    HW ← fHW_SedInletChannelPlumbing(Q_Plant)
    while W*HW < fA_SedInletChannelED(Q_Plant)
        HW ← HW + 1 mm if HW < W
        W ← W + 1 mm otherwise
    return HW
fH_SedInletChannel(Q_Plant) := fHW_SedInletChannel(Q_Plant) + H_PlantFreeboard
fEN_InletChannelGeom(Q_Plant) :=
    hl_weir ← Headloss_weir(Q_Plant, fW_SedInletChannelPreWeir(Q_Plant))
    Geom_Channel ← Perpendicular_Weir if (hl_weir ≤ HL_SedWeirMax)
    Geom_Channel ← Parallel_Weir otherwise
    return Geom_Channel
fW_SedWeirInlet(Q_Plant) :=
    fW_SedInletChannelPreWeir(Q_Plant) if fEN_InletChannelGeom(Q_Plant) == Perpendicular_Weir
    fL_SedChannel(Q_Plant) otherwise
fHL_SedWeirInlet(Q_Plant) := Headloss_weir(Q_Plant, fW_SedWeirInlet(Q_Plant))
fH_SedWeirInlet(Q_Plant) := fHW_SedInletChannel(Q_Plant) - fHL_SedWeirInlet(Q_Plant)
fW_SedInletChannelPostWeir(Q_Plant) := max(W_ChannelMin, W_HorizChannel(Q_Plant, fH_SedWeirInlet(Q_Plant), HL_ChannelMax, fL_SedChannel(Q_Plant), Nu_Water, E_Concrete, 1))
fW_SedInletChannel(Q_Plant) :=
    fW_SedInletChannelPreWeir(Q_Plant) if fEN_InletChannelGeom(Q_Plant) == Perpendicular_Weir
    fW_SedInletChannelPreWeir(Q_Plant) + T_SedWeir + fW_SedInletChannelPostWeir(Q_Plant) if fEN_InletChannelGeom(Q_Plant) == Parallel_Weir
fV_SedInletChannel(Q_Plant) := Q_Plant/(fW_SedInletChannelPreWeir(Q_Plant)*fHW_SedInletChannel(Q_Plant))
fND_SedInletChannelDrain(Q_Plant) := NominalDiameter(D_PipeTotal(Q_Plant, HW_SedEst, HW_SedEst + L_SedEst, Nu_Water, E_Pvc, K_PipeEnt + K_PipeExit + K_El90), PS_Default)
fW_SedInletChannelDrainBox(Q_Plant) := max(2*S_Fitting + 2*ConRadius(fND_SedInletChannelDrain(Q_Plant)), fW_SedInletChannelPostWeir(Q_Plant))
# Outlet Pipe calculations
fL_FiEntrancePipeEst(Q_Plant) := W_DCWalkway + fW_SedInletChannel(Q_Plant) + 1 m
fND_FiEntrancePipeMax(Q_Plant) := FloorNearest(Pipesizes[index(FloorNearest(W_SedBay/2 - ConRadius(fND_SedManifold(Q_Plant)) - 2*S_Fitting, Pipesizes[:, 1]), Pipesizes[:, 1]), 0], AvailND)
fND_FiEntrancePipe(Q_Plant) := min(D_pipeschedule(min(Q_Plant, Q_pipetotal(innerdiameter(AvailND[last(AvailND)], PS_Default), HL_FiEntrancePipeMax, fL_FiEntrancePipeEst(Q_Plant), Nu_Water, E_Pvc, K_FiEntrancePipe)), PS_Default, HL_FiEntrancePipeMax, fL_FiEntrancePipeEst(Q_Plant), Nu_Water, E_Pvc, K_FiEntrancePipe), fND_FiEntrancePipeMax(Q_Plant))
fN_FiEntrancePipes(Q_Plant) := ceil(Q_Plant/Q_pipetotal(innerdiameter(fND_FiEntrancePipe(Q_Plant), PS_Default), HL_FiEntrancePipeMax, fL_FiEntrancePipeEst(Q_Plant), Nu_Water, E_Pvc, K_FiEntrancePipe))
fQ_FiEntrancePipe(Q_Plant) := Q_Plant/fN_FiEntrancePipes(Q_Plant)
fHL_FiEntrancePipe(Q_Plant) := h_l(fQ_FiEntrancePipe(Q_Plant), innerdiameter(fND_FiEntrancePipe(Q_Plant), PS_Default), fL_FiEntrancePipeEst(Q_Plant), K_FiEntrancePipe, Nu_Water, E_Pvc)
# Exit Channel calculations
fND_SedExitChannelDrain(Q_Plant) := NominalDiameter(D_PipeTotal(Q_Plant, HW_SedEst, HW_SedEst, Nu_Water, E_Pvc, K_PipeEnt + K_PipeExit + K_El90), PS_Default)
fHW_SedExitChannel(Q_Plant) := fHW_SedInletChannel(Q_Plant) - HL_SedLaunderBod
fW_SedExitChannelPreWeir(Q_Plant) := max(W_HorizChannel(Q_Plant, fHW_SedExitChannel(Q_Plant), HL_ChannelMax, fL_SedChannel(Q_Plant), Nu_Water, E_Concrete, 1), W_ChannelMin, CapHeight(fND_SedLaunder(Q_Plant)) + 1.05*L_SedLaunderCapExcess)
fW_SedExitChannelPostWeir(Q_Plant) := max(2*ConRadius(fND_FiEntrancePipe(Q_Plant))*(fN_FiEntrancePipes(Q_Plant) > 1), W_ChannelMin, W_HorizChannel(Q_Plant, fH_SedWeirInlet(Q_Plant), HL_ChannelMax, fL_SedChannel(Q_Plant) - W_SedBay/2, Nu_Water, E_Concrete, 1))
fH_SedWeirExit(Q_Plant) := fHW_SedExitChannel(Q_Plant) - fHL_SedWeirExit(Q_Plant)
fW_SedExitChannel(Q_Plant) := fW_SedExitChannelPreWeir(Q_Plant) + T_SedWeir + fW_SedExitChannelPostWeir(Q_Plant)
fH_ExitChannelLaunder(Q_Plant) := fH_SedWeirExit(Q_Plant) - outerdiameter(fND_SedLaunder(Q_Plant))
fW_SedExitChannelDrainBox(Q_Plant) := max(2*S_Fitting + 2*ConRadius(fND_SedExitChannelDrain(Q_Plant)), fW_SedExitChannelPreWeir(Q_Plant))
# Upflow Length calculations
fH_LamellaToLaunder(Q_Plant) := T_ConcreteMin + CapThickness(fND_SedLaunder(Q_Plant))
fL_SedUpflow(Q_Plant) :=
    i ← 0
    L ← 0 m
    while L < fL_SedUpflowEst(Q_Plant)
        i ← i + 1
        L ← (fH_SedWeirExit(Q_Plant) + T_ChannelWall - outerdiameter(fND_SedLaunder(Q_Plant)) - fH_LamellaToLaunder(Q_Plant) - T_SedPlate*cos(AN_SedPlate))/tan(AN_SedPlate) + T_SedPlate/sin(AN_SedPlate) + (PlateIndex[i] - 1)*B_SedPlate/sin(AN_SedPlate) - 2*T_ConcreteMin
    return L
fL_SedChannelToWall(Q_Plant) := fL_SedUpflow(Q_Plant) + 2*T_ConcreteMin
fN_SedPlates(Q_Plant) := round((fL_SedChannelToWall(Q_Plant) - (fH_SedWeirExit(Q_Plant) + T_ChannelWall - outerdiameter(fND_SedLaunder(Q_Plant)) - fH_LamellaToLaunder(Q_Plant) - T_SedPlate*cos(AN_SedPlate))/tan(AN_SedPlate) - T_SedPlate/sin(AN_SedPlate))/(B_SedPlate/sin(AN_SedPlate)) + 1)
fV_SedUp(Q_Plant) := fQ_SedBay(Q_Plant)/(fL_SedUpflow(Q_Plant)*W_SedBay)
# Calculate tank and hopper length
fL_SedHopper(Q_Plant) := fW_SedExitChannel(Q_Plant) + T_SedWeir + fW_SedInletChannel(Q_Plant) + T_ChannelWall + 2*T_ConcreteMin
fL_Sed(Q_Plant) := fW_SedExitChannel(Q_Plant) + T_SedWeir + fW_SedInletChannel(Q_Plant) + T_ChannelWall + 2*T_ConcreteMin + {
    i ← 0
    L ← 0 m
    while L < fL_SedUpflowEst(Q_Plant)
        i ← i + 1
        L ← (fH_SedWeirExit(Q_Plant) + T_ChannelWall - outerdiameter(fND_SedLaunder(Q_Plant)) - (T_ConcreteMin + CapThickness(fND_SedLaunder(Q_Plant))) - T_SedPlate*cos(AN_SedPlate))/tan(AN_SedPlate) + T_SedPlate/sin(AN_SedPlate) + (PlateIndex[i] - 1)*B_SedPlate/sin(AN_SedPlate) - 2*T_ConcreteMin
    return L
}
# Sludge Drain
fQ_SedSludgeDrain(Q_Plant) := 2*W_SedBay*fL_SedUpflow(Q_Plant)*HW_SedEst/Ti_SludgeDrain
fN_SedSludgeOrificesEst(Q_Plant) := floor(fL_SedUpflow(Q_Plant)/B_SedSludgeOrificesEst) - 1
fQ_SedSludgeOrificesEst(Q_Plant) := fQ_SedSludgeDrain(Q_Plant)/fN_SedSludgeOrificesEst(Q_Plant)
fD_SedSludgeChannel(Q_Plant) := D_Manifold(fQ_SedSludgeDrain(Q_Plant), HW_SedEst/3, fL_SedUpflow(Q_Plant), Pi_QSludgeOrifices, Nu_Water, E_Concrete, 0, fN_SedSludgeOrificesEst(Q_Plant))
fND_SedSludgePipe(Q_Plant) := NominalDiameter(D_PipeTotal(fQ_SedSludgeDrain(Q_Plant), HW_SedEst/3, fL_SedUpflow(Q_Plant) + L_FlocHopperEst, Nu_Water, E_Pvc, K_PipeExit + K_GateValve), PS_Default)
fHL_SedSludgeEst(Q_Plant) := HL_Manifold(fQ_SedSludgeDrain(Q_Plant), fD_SedSludgeChannel(Q_Plant), fL_SedUpflow(Q_Plant) + L_FlocHopperEst, 0, Nu_Water, E_Concrete, fN_SedSludgeOrificesEst(Q_Plant))
fHL_SedSludgeOrificeEst(Q_Plant) := HW_SedEst - fHL_SedSludgeEst(Q_Plant)
fA_SedSludge(Q_Plant) := π/4*fD_SedSludgeChannel(Q_Plant)^2
fW_SedSludge(Q_Plant) := sqrt(fA_SedSludge(Q_Plant))
fH_SedSludge(Q_Plant) := fA_SedSludge(Q_Plant)/fW_SedSludge(Q_Plant)
fZ_SedSludge(Q_Plant) := fH_SedSludge(Q_Plant)
# Sludge Drain Cover
fT_SedDrainCoverLedge(Q_Plant) := max(2 cm, outerradius(ND_SedJetReverser) - fW_SedSludge(Q_Plant)/2)
fW_SedDrainCover(Q_Plant) := max(fW_SedSludge(Q_Plant) + 2*fT_SedDrainCoverLedge(Q_Plant), outerdiameter(ND_SedJetReverser))
fL_SedDrainCoverSlopes(Q_Plant) := (fW_SedDrainCover(Q_Plant) - outerdiameter(ND_SedJetReverser))/2
fH_SedDrainCoverTotal(Q_Plant) := T_ConcreteMin + outerradius(ND_SedJetReverser) + fL_SedDrainCoverSlopes(Q_Plant)*tan(AN_SedSlope)
fA_SedDrainCover(Q_Plant) := fH_SedDrainCoverTotal(Q_Plant)*fW_SedDrainCover(Q_Plant) - fL_SedDrainCoverSlopes(Q_Plant)*tan(AN_SedSlope)*(2*fL_SedDrainCoverSlopes(Q_Plant) + outerdiameter(ND_SedJetReverser)) - 1/2*π*outerradius(ND_SedJetReverser)^2
fL_SedDrainCoverTotal(Q_Plant) := fL_Sed(Q_Plant) - fL_SedHopper(Q_Plant)
fL_SedDrainCoverSegmentMax(Q_Plant) := M_DrainCoverMax/(fA_SedDrainCover(Q_Plant)*ρ_Concrete)
fN_SedDrainCover(Q_Plant) := ceil(fL_SedDrainCoverTotal(Q_Plant)/fL_SedDrainCoverSegmentMax(Q_Plant))
fL_SedDrainCoverSegment(Q_Plant) := fL_SedDrainCoverTotal(Q_Plant)/fN_SedDrainCover(Q_Plant) - S_SedDrainCoverSegment
fB_SedSludgeOrifices(Q_Plant) := fL_SedDrainCoverSegment(Q_Plant)/trunc(fL_SedDrainCoverSegment(Q_Plant)/B_SedSludgeOrificesEst)
fN_SedSludgeOrifices(Q_Plant) := floor(fL_SedDrainCoverTotal(Q_Plant)/fB_SedSludgeOrifices(Q_Plant))
fD_SedSludgeOrifice(Q_Plant) := D_circle(A_orifice(fHL_SedSludgeOrificeEst(Q_Plant), Pi_VenaContractaOrifice, fQ_SedSludgeDrain(Q_Plant)/fN_SedSludgeOrifices(Q_Plant)))
fN_SedDrainCoverSegmentOrifices(Q_Plant) := floor(fN_SedSludgeOrifices(Q_Plant)/fN_SedDrainCover(Q_Plant))
# Inlet Manifold Design
fL_SedManifoldPipeActive(Q_Plant) := fL_SedUpflow(Q_Plant) + T_ConcreteMin + ConRadius(fND_SedManifold(Q_Plant))/tan(AN_SedHopperSlope) - CapThickness(fND_SedManifold(Q_Plant))
fW_SedDiffuserOutlet(Q_Plant) := 2/Pi_VenaContractaOrifice^2*((Pi_Jet*fW_Sed(Q_Plant)*V_SedUpBod/2)^3/ED_SedInlet)^(1/4)
OD_Diffuser := outerdiameter(ND_SedDiffuser)
Circ_SedDiffuser := π*innerdiameter(ND_SedDiffuser, PS_Default)
T_SedDiffuserWall := outerradius(ND_SedDiffuser) - innerdiameter(ND_SedDiffuser, PS_Default)/2
L_SedDiffuserOutlet := 5 cm - 2*T_SedDiffuserWall  # based on the mold
B_SedManifoldPort := L_SedDiffuserOutlet + 2*T_SedDiffuserWall
fN_SedManifoldPorts(Q_Plant) := floor((fL_SedUpflow(Q_Plant) - SocketDepth(fND_SedManifold(Q_Plant)) - CapThickness(fND_SedManifold(Q_Plant)))/(L_SedDiffuserOutlet + 2*T_SedDiffuserWall))
fQ_SedManifoldPort(Q_Plant) := fQ_SedBay(Q_Plant)/fN_SedManifoldPorts(Q_Plant)
fD_SedManifoldPort(Q_Plant) := CeilNearest(D_PipeED(ED_SedInlet, fQ_SedManifoldPort(Q_Plant), Pi_VenaContractaOrifice, Pi_Jet), D_Drill)
fV_SedManifoldPort(Q_Plant) := fQ_SedManifoldPort(Q_Plant)/(π*fD_SedManifoldPort(Q_Plant)^2/4)*1/Pi_VenaContractaOrifice
fV_SedDiffuser(Q_Plant) := fQ_SedManifoldPort(Q_Plant)/(B_SedManifoldPort*W_SedDiffuserOutlet)
fL_SedDiffuserRoundjetanalogy(Q_Plant) := 6.2*fV_SedManifoldPort(Q_Plant)/fV_SedDiffuser(Q_Plant)*fD_SedManifoldPort(Q_Plant)*sqrt(Pi_VenaContractaOrifice)
fL_SedDiffuserPlanejetanalogy(Q_Plant) := (2.41*fV_SedManifoldPort(Q_Plant)/fV_SedDiffuser(Q_Plant))^2*fD_SedManifoldPort(Q_Plant)*sqrt(Pi_VenaContractaOrifice)
fL_SedManifoldDiffuser(Q_Plant) := max(fL_SedDiffuserPlanejetanalogy(Q_Plant), fL_SedDiffuserRoundjetanalogy(Q_Plant))
fZ_SedManifoldPipe(Q_Plant) := Plant_Origin[2] + fH_SedSludge(Q_Plant) + T_ConcreteMin + outerradius(ND_SedJetReverser) + fL_SedManifoldDiffuser(Q_Plant) + innerdiameter(fND_SedManifold(Q_Plant), PS_Default)/2
# Side Slopes
W_SedSideSlopes := (W_SedBay - outerradius(ND_SedJetReverser))/2
H_SedSideSlopes := tan(AN_SedSlope)*W_SedSideSlopes
fZ_SedSideSlopes(Q_Plant) := Plant_Origin[2] + fH_SedSludge(Q_Plant) + T_ConcreteMin + outerradius(ND_SedJetReverser) + H_SedSideSlopes
# Plate Length
fL_SedPlateActive(Q_Plant) := (fN_SedPlates(Q_Plant) - 1)*S_SedPlate/sin(AN_SedPlate)
fL_SedPlateEst(Q_Plant) := (B_SedPlate*fQ_SedBay(Q_Plant)/(W_SedBay*fL_SedPlateActive(Q_Plant)*V_SedCBod) - S_SedPlate)/(sin(AN_SedPlate)*cos(AN_SedPlate))
fN_PlatesPerSheet(Q_Plant) := floor(L_SedPlateSheet/fL_SedPlateEst(Q_Plant))
fL_SedPlate(Q_Plant) := L_SedPlateSheet/fN_PlatesPerSheet(Q_Plant)
fL_SedPlateUnderChan(Q_Plant) := (fL_SedPlate(Q_Plant)*sin(AN_SedPlate) + T_SedPlate*cos(AN_SedPlate) + fH_LamellaToLaunder(Q_Plant) + outerdiameter(fND_SedLaunder(Q_Plant)) - fH_SedWeirExit(Q_Plant) - T_ChannelWall)/tan(AN_SedPlate) + T_SedPlate/sin(AN_SedPlate)
fV_SedActiveUp(Q_Plant) := fQ_SedBay(Q_Plant)/(W_SedBay*fL_SedPlateActive(Q_Plant))
fV_SedCaptureCheck(Q_Plant) := fV_SedActiveUp(Q_Plant)*B_SedPlate/(fL_SedPlateEst(Q_Plant)*sin(AN_SedPlate)*cos(AN_SedPlate) + S_SedPlate)
# Floc Weir, Hopper, Hopper Drain, and Tank Height
fZ_SedFlocWeir(Q_Plant) := max(fZ_SedManifoldPipe(Q_Plant) + outerradius(fND_SedManifold(Q_Plant)) + T_ConcreteMin, fZ_SedSideSlopes(Q_Plant) + H_SedSlopesToFlocWeirMin)
fZ_SedLamellaBottomMin(Q_Plant) := fZ_SedFlocWeir(Q_Plant) + H_FlocWeirToLamellaMin
fZ_SedLaunderMin(Q_Plant) := fZ_SedLamellaBottomMin(Q_Plant) + (fL_SedPlate(Q_Plant) + T_SedPlate)*sin(AN_SedPlate) + T_ConcreteMin + ConRadius(fND_SedLaunder(Q_Plant))
fZ_SedChannelBottomMin(Q_Plant) := fZ_SedLaunderMin(Q_Plant) + ConRadius(fND_SedLaunder(Q_Plant)) - fH_SedWeirExit(Q_Plant)
fH_SedHopperAngleFit(Q_Plant) := fZ_SedChannelBottomMin(Q_Plant) - fZ_SedManifoldPipe(Q_Plant) + ConRadius(fND_SedManifold(Q_Plant))
fH_SedHopperHeightNoCoupling(Q_Plant) := fW_SedInletChannel(Q_Plant) + fW_SedExitChannel(Q_Plant) + T_ChannelWall + 3*T_SedWeir - fW_SedInletChannelPreWeir(Q_Plant) + S_Fitting + 2*ConRadius(fND_SedManifold(Q_Plant))
fH_SedChanBottomTo45Est(Q_Plant) := fH_SedHopperAngleFit(Q_Plant) - fH_SedHopperHeightNoCoupling(Q_Plant)
fEN_SedChannelCoupling(Q_Plant) :=
    1 if fH_SedChanBottomTo45Est(Q_Plant) > 0
    0 otherwise
fZ_SedChannelBottom(Q_Plant) :=
    fZ_SedChannelBottomMin(Q_Plant) if fEN_SedChannelCoupling(Q_Plant) == 0 or fH_SedChanBottomTo45Est(Q_Plant) ≥ CouplingLength(fND_SedManifold(Q_Plant))
    (fZ_SedChannelBottomMin(Q_Plant) + CouplingLength(fND_SedManifold(Q_Plant)) - fH_SedChanBottomTo45Est(Q_Plant)) otherwise
fZ_SedLaunder(Q_Plant) := fZ_SedChannelBottom(Q_Plant) + fH_SedWeirExit(Q_Plant) - ConRadius(fND_SedLaunder(Q_Plant))
fZ_SedLamellaBottom(Q_Plant) := fZ_SedLaunder(Q_Plant) - ((fL_SedPlate(Q_Plant) + T_SedPlate)*sin(AN_SedPlate) + T_ConcreteMin + ConRadius(fND_SedLaunder(Q_Plant)))
fH_SedChanBottomTo45(Q_Plant) := fZ_SedChannelBottom(Q_Plant) - fZ_SedManifoldPipe(Q_Plant) + ConRadius(fND_SedManifold(Q_Plant)) - fH_SedHopperHeightNoCoupling(Q_Plant)
fZ_SedManElbow1(Q_Plant) :=
    (fZ_SedChannelBottom(Q_Plant) - SocketDepth(fND_SedManifold(Q_Plant))) if fEN_SedChannelCoupling(Q_Plant) == 0
    fZ_SedChannelBottom(Q_Plant) - fH_SedChanBottomTo45(Q_Plant) - SocketDepth(fND_SedManifold(Q_Plant)) otherwise
fZ_SedManPipeAngledBottom(Q_Plant) := fZ_SedManifoldPipe(Q_Plant) + ElbowRadius(fND_SedManifold(Q_Plant)) - ElbowRadius(fND_SedManifold(Q_Plant))/sqrt(2)
fZ_SedManPipeAngledTop(Q_Plant) := fZ_SedManElbow1(Q_Plant) - ElbowRadius(fND_SedManifold(Q_Plant))/sqrt(2)
fX_SedManPipeAngledTop(Q_Plant) := Plant_Origin[0] - fL_Sed(Q_Plant) + fW_SedInletChannelPreWeir(Q_Plant) - S_Fitting - ElbowRadius(fND_SedManifold(Q_Plant))/sqrt(2) + ElbowRadius(fND_SedManifold(Q_Plant)) - ConRadius(fND_SedManifold(Q_Plant))
fX_SedManPipeAngledBottom(Q_Plant) := fX_SedManPipeAngledTop(Q_Plant) + fZ_SedManPipeAngledTop(Q_Plant) - fZ_SedManPipeAngledBottom(Q_Plant)
fL_SedMan45Pipe(Q_Plant) := (fX_SedManPipeAngledBottom(Q_Plant) - fX_SedManPipeAngledTop(Q_Plant))*sqrt(2)
fL_SedManifoldPipe(Q_Plant) := -(fX_SedManPipeAngledBottom(Q_Plant) + ElbowRadius(fND_SedManifold(Q_Plant))/sqrt(2)) + Plant_Origin[0] - SocketDepth(fND_SedManifold(Q_Plant))
fH_SedFlocWeir(Q_Plant) := fZ_SedFlocWeir(Q_Plant) - fZ_SedSludge(Q_Plant)
fZ_SedWeirExit(Q_Plant) := fZ_SedChannelBottom(Q_Plant) + fH_SedWeirExit(Q_Plant)
fH_Sed(Q_Plant) := fZ_SedChannelBottom(Q_Plant) + fH_SedInletChannel(Q_Plant)
fZ_SedHopperBottom(Q_Plant) := fZ_SedSludge(Q_Plant) + T_ConcreteMin
fL_SedHopperBackSlope(Q_Plant) := (fZ_SedFlocWeir(Q_Plant) - fZ_SedHopperBottom(Q_Plant))/tan(AN_SedHopperSlope)
fH_SedHopperBackSlope(Q_Plant) := fL_SedHopperBackSlope(Q_Plant)*tan(AN_SedHopperSlope)
fH_SedHopperFrontSlopeMax(Q_Plant) := fZ_SedManifoldPipe(Q_Plant) - fZ_SedHopperBottom(Q_Plant)
fL_SedHopperFrontSlopeMax(Q_Plant) := fH_SedHopperFrontSlopeMax(Q_Plant)/tan(AN_SedHopperSlope)
fZ_SedHopperBackSlope(Q_Plant) := fZ_SedHopperBottom(Q_Plant) + fH_SedHopperBackSlope(Q_Plant)
fH_SedHopperFrontSlope(Q_Plant) :=
    fH_SedHopperFrontSlopeMax(Q_Plant) if fL_SedHopperFrontSlopeMax(Q_Plant) + fL_SedHopperBackSlope(Q_Plant) ≥ fL_SedHopper(Q_Plant) - T_ConcreteMin
    (0 m) otherwise
fZ_SedHopperFrontSlope(Q_Plant) := fZ_SedHopperBottom(Q_Plant) + fH_SedHopperFrontSlope(Q_Plant)
fL_SedHopperFrontSlope(Q_Plant) :=
    (fL_SedHopper(Q_Plant) - T_ConcreteMin - fL_SedHopperBackSlope(Q_Plant)) if fL_SedHopperFrontSlopeMax(Q_Plant) + fL_SedHopperBackSlope(Q_Plant) < fL_SedHopper(Q_Plant) - T_ConcreteMin
    fH_SedHopperFrontSlope(Q_Plant)/tan(AN_SedHopperSlope) otherwise
fZ_SedHopperIntersect(Q_Plant) :=
    fZ_SedHopperFrontSlope(Q_Plant) if fL_SedHopperFrontSlopeMax(Q_Plant) + fL_SedHopperBackSlope(Q_Plant) < fL_SedHopper(Q_Plant) - T_ConcreteMin
    (((fL_SedHopperBackSlope(Q_Plant) - (fL_SedHopper(Q_Plant) - T_ConcreteMin - fL_SedHopperFrontSlope(Q_Plant)))/2)*tan(AN_SedHopperSlope) + fZ_SedHopperBottom(Q_Plant)) otherwise
fX_SedHopperBottom(Q_Plant) :=
    (Plant_Origin[0] - fL_Sed(Q_Plant) + fL_SedHopperBackSlope(Q_Plant) - ((fL_SedHopperBackSlope(Q_Plant) - (fL_SedHopper(Q_Plant) - T_ConcreteMin - fL_SedHopperFrontSlope(Q_Plant)))/2)) if fL_SedHopperFrontSlopeMax(Q_Plant) + fL_SedHopperBackSlope(Q_Plant) ≥ fL_SedHopper(Q_Plant) - T_ConcreteMin
    (Plant_Origin[0] - fL_Sed(Q_Plant) + fL_SedHopperBackSlope(Q_Plant)) otherwise
# Exit Launder
B_SedLaunderOrifices := B_SedLaunderOrificesEst
fL_SedLaunder(Q_Plant) :=
    fL_SedChannelToWall(Q_Plant) - CapThickness(fND_SedLaunder(Q_Plant)) if T_ChannelWall > 2*CouplingLength(fND_SedLaunder(Q_Plant))
    fL_SedChannelToWall(Q_Plant) + T_ChannelWall - 2*CouplingLength(fND_SedLaunder(Q_Plant)) - CapThickness(fND_SedLaunder(Q_Plant)) if CouplingLength(fND_SedLaunder(Q_Plant)) < T_ChannelWall < 2*CouplingLength(fND_SedLaunder(Q_Plant))
    fL_SedChannelToWall(Q_Plant) + T_ChannelWall - CouplingLength(fND_SedLaunder(Q_Plant)) - CapThickness(fND_SedLaunder(Q_Plant)) otherwise
fN_SedLaunderOrifices(Q_Plant) := floor((fL_SedLaunder(Q_Plant) - CapHeight(fND_SedLaunder(Q_Plant)) + CapThickness(fND_SedLaunder(Q_Plant)) - SocketDepth(fND_SedLaunder(Q_Plant)))/B_SedLaunderOrifices)
fQ_SedLaunderOrifices(Q_Plant) := fQ_SedBay(Q_Plant)/fN_SedLaunderOrifices(Q_Plant)
fHL_SedLaunderMajor(Q_Plant) := HL_Manifold(fQ_SedBay(Q_Plant), innerdiameter(fND_SedLaunder(Q_Plant), PS_Default), fL_SedLaunder(Q_Plant), 0, Nu_Water, E_Pvc, fN_SedLaunderOrifices(Q_Plant))
fHL_SedLaunderOrificeEst(Q_Plant) := HL_SedLaunderBod - fHL_SedLaunderMajor(Q_Plant)
fD_SedLaunderOrifice(Q_Plant) := RoundNearest(D_circle(A_orifice(fHL_SedLaunderOrificeEst(Q_Plant), Pi_VenaContractaOrifice, fQ_SedLaunderOrifices(Q_Plant))), D_Drill)
fHL_SedLaunderOrifice(Q_Plant) := h_orifice(fD_SedLaunderOrifice(Q_Plant), Pi_VenaContractaOrifice, fQ_SedLaunderOrifices(Q_Plant))
fHW_Sed(Q_Plant) := fZ_SedChannelBottom(Q_Plant) + fHW_SedExitChannel(Q_Plant) + HL_SedLaunderBod
# Hopper Drain
fQ_SedHopperDrainMax(Q_Plant) := Q_pipetotal(innerdiameter(ND_SedHopperDrain, PS_Default), fHW_Sed(Q_Plant) - fZ_SedHopperBottom(Q_Plant), fL_SedHopperBackSlope(Q_Plant) + max(CouplingLength(ND_SedHopperDrain), T_PlantWall) + ValveLength(ND_SedHopperDrain) + π/4*ElbowRadius(ND_SedHopperDrain), Nu_Water, E_Pvc, K_PipeEnt + K_PipeExit + K_GateValve)
fL_SedHopperDrainPipe(Q_Plant) := fL_SedHopperBackSlope(Q_Plant) + T_PlantWall - CouplingLength(ND_SedHopperDrain) + 2*SocketDepth(ND_SedHopperDrain)
# Module Design
fN_SedModules(Q_Plant) :=
    for i ∈ N_SedModulePlatesMin .. N_SedModulePlatesMax
        N ← fN_SedPlates(Q_Plant)/i
        break if mod(fN_SedPlates(Q_Plant), i) == 0
    return N
fN_SedModulePlates(Q_Plant) := fN_SedPlates(Q_Plant)/fN_SedModules(Q_Plant)
L_SedModulePipeIncrement := B_SedPlate - T_SedPlate - (CapDiameter(NominalPipeSize(ND_SedModulePipeSpacer))/2 - outerradius(NominalPipeSize(ND_SedModulePipeSpacer)))
fL_SedModulePipe(Q_Plant) := fN_SedModulePlates(Q_Plant)*B_SedPlate - (B_SedPlate - T_SedPlate) + 2*L_SedModulePipeIncrement
fS_SedModulePipes(Q_Plant) := max(fL_SedPlate(Q_Plant) - 2*outerdiameter(ND_SedModulePipe) - 2*S_SedPlateModuleMin - (fN_SedModulePlates(Q_Plant)*(T_SedPlate + (B_SedPlate - T_SedPlate)) - (B_SedPlate - T_SedPlate))/tan(AN_SedPlate), (fL_SedModulePipe(Q_Plant) - L_SedModulePipeIncrement)*tan(90 deg - AN_SedPlate) + CapDiameter(NominalPipeSize(ND_SedModulePipeSpacer)))
L_SedModulePipeCap := min(B_SedPlate - T_SedPlate, CapHeight(NominalPipeSize(ND_SedModulePipeSpacer)) - (CapDiameter(NominalPipeSize(ND_SedModulePipeSpacer))/2 - outerradius(NominalPipeSize(ND_SedModulePipeSpacer))))
fS_SedPlateModule(Q_Plant) := (fL_SedPlate(Q_Plant) - fS_SedModulePipes(Q_Plant) - (fL_SedModulePipe(Q_Plant) - 2*L_SedModulePipeIncrement)/tan(AN_SedPlate))/2
fL_SedActive(Q_Plant) := fN_SedPlates(Q_Plant)*B_SedPlate/sin(AN_SedPlate) - T_SedPlate/sin(AN_SedPlate)
