# [reference: BasicInputs3Sed1Bay.xmcd]
# [reference: ExpertInputs.xmcd]
# [reference: DesignAssumptions.xmcd]
# [reference: MathFunctions.xmcd]
# [reference: PipeDatabase.xmcd]
# [reference: MinorLossCoefficients.xmcd]
# [reference: FluidsFunctions.xmcd]
# steps to design inlet manifold and determine maximum sed tank length
# new spec for manifold diameter is based on scour velocity
# need a maximum length of sed tank that we are willing to design based on maximum size pipe that we are willing to use. Perhaps based on how a large pipe fits in the valley. I propose tht we randomly pick a max pipe diameter of 12" (for now)
# Algorithm to give port diameters based on Pi.VenacontractaOrifice*port area = pipe area
# New inputs needed
V_Scour := 0.15*m/s
ND_SedManifoldMax := 12 in
B_SedManifoldPort := 10 cm
ID_SedManifoldPipe := innerdiameter(ND_SedManifoldMax, EN_PipeSpec)
A_SedManifoldPipe := π*ID_SedManifoldPipe^2/4
L_SedMax := A_SedManifoldPipe*Pi_VenaContractaOrifice*V_Scour/(V_SedUpBod*W_SedBay)
L_SedMax = 7.42393 m
A_SedManifoldPorts := A_SedManifoldPipe/Pi_VenaContractaOrifice
# Influent Sed Manifold Program
# The purpose of this program is to check the design of the sedimentation tank influent manifold and to determine the effect of the ratio of the Manifold to the total port area. Conventional design guidelines suggested a area ratio of 4, but that forces us to use a very large manifold with the likely consequence that more flocs will settle in the manifold. In addition a large manifold will limit the length of our sed tanks or will require the sed tanks to be deeper.
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Q_SedManifoldPort := V_SedUpBod*W_SedBay*B_SedManifoldPort = 4.47222 L/min
# Calculate the energy dissipation rate created by the port. We will use this to evaluate this design.
N_SedManifoldPort := floor(L_SedMax/B_SedManifoldPort)
A_SedManifoldPort := A_SedManifoldPorts/N_SedManifoldPort
# This portion serves to calculate the energy dissipation through a port.
ED_SedManifoldPort := 1/(20*A_SedManifoldPort^(7/2))*(Q_SedManifoldPort/Pi_VenaContractaOrifice)^3
ED_SedManifoldPort = 0.00117912 m^2/s^3
Q_Sed := Q_Plant/N_SedTanks = 190.028 L/min
L_SedTotal := Q_Plant/(V_SedUpBod*W_SedBay) = 8.49813 m  # This is the total length of a single valley (or cell) sed tank
N_SedBaysTotal := ceil(L_SedTotal/L_SedMax) = 2  # This is the minimum number of bays required for the entire plant (not the number per sed tank!)
N_SedBaysMin := ceil(N_SedBaysTotal/N_SedTanks) = 1
N_SedBays := max(N_SedBaysMin, N_SedBaysEst)  # Number of pairs of slopes per sedimentation tank.
L_Sed := Q_Sed/(W_SedBay*N_SedBays*V_SedUpBod)
L_Sed = 4.24907 m
N_SedPortsMax := floor(L_Sed/W_SedSlopePlate) = 14
N_SedPorts := N_SedPortsMax
W_Sed := N_SedBays*W_SedBay = 0.92 m
W_SedBayActual := (W_Sed - (N_SedBays - 1)*T_ChannelWall)/N_SedBays
# W.SedInlet is redefined to be accurate for the width loss from adding
# dividing walls between adjacent slope pairs.
W_SedInlet := W_SedBayActual/2 - W_SedSludgeFlat/2 - T_SedInletSlope*sin(AN_SedTopInlet) = 0.400359 m
Q_SedManifold := Q_Sed/(2*N_SedBays)
T_SedInletSlope*sin(AN_SedTopInlet) = 0.034641 m
Q_SedBay := Q_Sed/N_SedBays
L_SedSlopeManifold := W_SedInlet/cos(AN_SedTopInlet) = 0.800718 m
# Sludge Drain Program
HL_Valve := 0.8*HW_SedEst
# Here we are assuming that we are willing to use up to 80% of the available energy to get the flow through the valve and discharge it to atmosphere.
Q_SedSludgeDrain := W_SedBayActual*L_Sed*HW_SedEst/(0.5*Ti_SludgeDrain) = 0.00868698 m^3/s  # This is the initial drain rate
# The manifold ports alternate from side to side and thus there is one port every W.SedSlopePlate/2.
B_SedSludgeOrifices := W_SedSlopePlate/2
N_SedSludgeOrifices := floor(L_Sed/B_SedSludgeOrifices) = 28  # This is per Sed Bay
Q_SedSludgeOrifices := Q_SedSludgeDrain/N_SedSludgeOrifices
ND_SedSludgeValve := D_pipeschedule(Q_SedSludgeDrain, EN_PipeSpec, HL_Valve, T_PlantWall, Nu_Water, E_Pvc, K_GateValve + K_PipeExit) = 3 in
# This pipe is actually longer than the thickness of the plant wall. This is not a significant error since major losses are small, but we could eventually see if we can define this more accurately.
HL_Valve := h_e(Q_SedSludgeDrain, innerdiameter(ND_SedSludgeValve, EN_PipeSpec), K_GateValve + K_PipeExit) = 0.338887 m
# This is the actual head loss through the valve given its diameter
HL_SludgeDrain := HW_SedEst - HL_Valve = 1.66111 m
ID_SedSludge := ID_Manifold(Q_SedSludgeDrain, HL_SludgeDrain, L_Sed, Pi_QSludgeOrifices, EN_PipeSpec, Nu_Water, E_Concrete, 0, N_SedSludgeOrifices) = 2.88569 in
# This is the required diameter of the sludge drain if it were circular
HL_SedSludgeEst := HL_Manifold(Q_SedSludgeDrain, ID_SedSludge, L_Sed, 0, Nu_Water, E_Concrete, N_SedSludgeOrifices) = 24.3746 cm
HL_SedSludgeOrificeEst := HL_SludgeDrain - HL_SedSludgeEst = 141.737 cm
D_SedSludgeOrifice := RoundNearest(D_circle(A_orifice(HL_SedSludgeOrificeEst, Pi_VenaContractaOrifice, Q_SedSludgeOrifices)), D_Drill) = 11 mm
A_SedSludge := π/4*ID_SedSludge^2
W_SedSludge := sqrt(2*A_SedSludge) = 0.0918636 m  # Assume sludge drain is twice as wide as it is high (to save depth in the sed tank)
H_SedSludge := A_SedSludge/W_SedSludge = 0.0459318 m
T_SedSludge := T_SedInletSlope*(1 + cos(AN_SedTopInlet)) = 0.06 m
W_SedSludgeFlat + 2*T_SedInletSlope/sin(AN_SedTopInlet) = 0.142376 m
W_SedDrainCover := max(W_SedSludgeFlat + 2*T_SedInletSlope/sin(AN_SedTopInlet), W_SedSludge) + 2*W_SedSludgeSF
W_SedSludge = 0.0918636 m
W_SedInletBottom := W_SedBayActual/2 - W_SedDrainCover/2
Z_SedSludge := T_SedSludge + H_SedSludge = 0.105932 m
H_SedTopSlope := W_SedInlet*tan(AN_SedTopInlet) = 0.693442 m
H_SlopeThickness := T_SedInletSlope/cos(AN_SedTopInlet) = 0.08 m
Z_SedSlopes := Z_SedSludge + H_SedTopSlope = 0.799374 m
H_SedTunnelAvg := ((Z_SedSlopes - Z_SedSludge)/2) - H_SedBottomSlope/2  # error: This variable is undefined.
# Inlet Channel Design
# Length of the Inlet Channel
L_Channel := N_SedTanks*W_Sed + (N_SedTanks + 1)*T_PlantWall
# This sets the hieght of hte water in the channel to be the equal to the ledge that the lamella are sitting on.
A_InletChannel := A_Port(Q_Plant, ED_SedInlet, Pi_VenaContractaOrifice)
HW_InletChannel := sqrt(A_InletChannel)  # Height of the water in the Inlet Channel
# The length is based on the side of the sed tank
W_InletChannelED := A_InletChannel/HW_InletChannel
A_SedManifoldEntrance := A_Port(Q_SedManifold, ED_SedInlet, Pi_VenaContractaOrifice)
A_SedChimneyPipeMin := A_Port(Q_SedManifold, ED_Floc[1], Pi_VenaContractaOrifice)
ND_Pipesizes :=
    for i ∈ 0 .. rows(Pipesizes) - 1
        ND_Pipesizes[i] ← Pipesizes[i, 1]
    return ND_Pipesizes
D_Pipesizes :=
    for i ∈ 0 .. rows(Pipesizes) - 1
        ND_Pipesizes[i] ← Pipesizes[i, 0]
    return ND_Pipesizes
D_SedChimneyPipe := Dpipelarger(2*sqrt(A_SedChimneyPipeMin/π), D_Pipesizes)
ND_SedChimneyPipe := Dpipelarger(2*sqrt(A_SedChimneyPipeMin/π), ND_Pipesizes)
A_SedChimneyPipe := (D_SedChimneyPipe/2)^2*π
W_SedManifoldEntrance := 1.1*NominalDiameter(D_SedChimneyPipe, EN_PipeSpec) + 2*S_SedInletChannelMin
W_InletChannelEst := max(W_InletChannelED, W_SedManifoldEntrance) = 0.28352 m
L_SedManifoldEntrance := W_SedInletBottom - 3*T_SedManifoldEntrance = 0.211412 m
# The width of the channel is based on the necessity to be at least as great as the width determined with G, but also must be wide enough to fit sed inlet pipes.  This W.channel chooses the larger choice to fulfill both needs.
W_SedManifoldPort := W_SedInlet - 2*T_SedManifoldEntrance
H_SedBottomSlope := (W_SedInlet - ((W_SedDrainCover - W_SedSludge)/2))*tan(AN_SedBottomInlet) = 0.0617326 m
H_SedManifoldPort := 2*(A_SedManifoldEntrance + 0.5*H_SedBottomSlope*W_SedInlet)/W_SedManifoldPort
AN_SedManifoldPort := atan(H_SedManifoldPort/W_SedManifoldPort)
H_InletChannel := HW_InletChannel + H_PlantFreeboard = 0.320583 m
# This is the extra space left at the end of the sed tank that will not fit another slope plate
HL_SedWeirMax := 10 cm
Geom_InletChannel :=
    hl_weir ← Headloss_weir(Q_Plant, W_InletChannelEst)
    Geom_Channel ← Perpindicular_Weir if (hl_weir ≤ HL_SedWeirMax)
    Geom_Channel ← Parallel_Weir otherwise
    return Geom_Channel
    = 0
W_SedWeirInlet :=
    W_InletChannelEst if Geom_InletChannel == Perpindicular_Weir
    L_Channel otherwise
    = 0.28352 m
HL_SedWeirInlet := Headloss_weir(Q_Plant, W_SedWeirInlet) = 0.0524475 m
H_SedWeirInlet := HW_InletChannel - HL_SedWeirInlet = 6.61951 in
T_SedWeir := T_SedSlopePlate
W_InletChannel :=
    W_SedWeirInlet if Geom_InletChannel == Perpindicular_Weir
    w_minchannelHL(H_SedWeirInlet, HW_InletChannel, Q_Plant, L_Channel, Nu_Water, E_Concrete, 1, HL_SedWeirInlet) + T_SedWeir + W_InletChannelEst if Geom_InletChannel == Parallel_Weir
    = 0.28352 m
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N_SedPorts := floor((L_Sed - W_InletChannel - T_ChannelWall)/W_SedSlopePlate) = 12
W_SedSlopePlateRemaining := L_Sed - N_SedPorts*W_SedSlopePlate
# Launderer Design
# 1. Equally divide the flow from the plant into each sedimentation tank.
# 2. Calculate the number of orifices using an equal spacing on the length of the launder.
# 3. The flow through each orifice is the flow in the tank divided by the number of orifices.
# 4. The elevation of the manifold launder should be placed in the middle of the water depth above the lamella in the sedimentation tank.
# 5. Find the length of the longest and shortest launders to the plant leveling tank.
# 6. Using an iterative program, and the available pipe sizes from the pipe database, the launder diameter is determined with a function from fluids functions
# 7.Sum the number of bends in the launder piping
# 8. Use function to find equal flow between parallel pipes.
# 9. The diameter of the launder is the max value of 6 and 8.
# 10. Calculate the total headloss in the launder.
# 11. Calculate the total headloss in the orifice.
# 12. Use orifice equation to find diameter of orifice holes.
# The launder will be located between the top of the lamella and the surface of the water in the sedimentation tank, the orifices will be at the center of the launders
# Clarify this. Where are the orifices located? Current proposal is that the two rows be about 135 degrees apart and face slightly downward.
# Add solution method description
L_SedLaunderEst := L_Sed - 2*W_InletChannel - T_ChannelWall = 3.53203 m  # This estimate is good enough to do a full launder design
# 2.
N_SedLaunderOrifices := 2*floor(L_SedLaunderEst/B_SedLaunderOrifices) = 70  # This 2 must be from the assumption that there are two rows of orifices.
# 3.
Q_SedLaunderOrifices := (Q_SedBay/N_SedLaunders)/N_SedLaunderOrifices = 2.26223e-5 m^3/s
# 6.
K_SedLaunder := K_PipeExit = 1
# 7.
ND_SedLaunder := ND_Manifold(Q_SedBay/N_SedLaunders, HL_SedLaunderBod, L_SedLaunderEst, Pi_QLaunderOrifices, EN_PipeSpec, Nu_Water, E_Pvc, K_SedLaunder, N_SedLaunderOrifices) = 4 in
# 10.
HL_SedLaunderManifold := HL_Manifold(Q_SedBay/N_SedLaunders, ND_SedLaunder, L_SedLaunderEst, 0, Nu_Water, E_Pvc, N_SedLaunderOrifices) = 0.0657171 cm
# 11.
HL_SedLaunderOrifice := HL_SedLaunderBod - HL_SedLaunderManifold = 0.0393428 m
# 12.
D_SedLaunderOrifice := RoundNearest(D_circle(A_orifice(HL_SedLaunderOrifice, Pi_VenaContractaOrifice, Q_SedLaunderOrifices)), D_Drill) = 0.275591 in
HL_SedLaunder := h_orifice(D_SedLaunderOrifice, Pi_VenaContractaOrifice, Q_SedLaunderOrifices) = 0.0443886 m
# Currently HL.launder is used up and thus the water level in the plant level tank is HL.launder below the sed tank.
# If we round up to the next available drill bit diameter the head loss will drop slightly. We could then calculate a new actual total headloss. For now ...
# Exit Channel Design
# The length is based on the side of the sed tank, this is also the same length of the inlet channel.
L_ExitChannel := N_SedTanks*W_Sed + (N_SedTanks + 1)*T_PlantWall
# To Calculate the Width of the channel the width of the exit weir needs to be determined.
# The weir equation is used to determine the nominal size for the diameter of the weir (Assumes a circular over flow weir)
D_PltWeirEstimated := (3*Q_Plant/(2*Cd_PltWeir*sqrt(2*g)*π*Pi_PltWeir^(3/2)))^(2/5)
# Using the pipe database file, and given the schedule of the pipe, the actual nominal diameter of the pipe is determined
ND_PltWeir := NominalPipeSize(D_PltWeirEstimated) = 6 in
# The width of the exit channel will either be the same as the width of the inlet channel or as wide as the Outer Diameter of the exit weir.
Del_PltWeirH := (3*Q_Plant/(2*Cd_PltWeir*sqrt(2*g)*π*ND_PltWeir))^(2/3)
# To ensure uniform distribution of flow between tank bays, head loss in the channel was designed to be twenty times smaller than head loss in the launder. After converting from head loss to flow, the ratio of flow rates in the launders is calculated to be sqrt(20/21)
Π_QSedTanks := sqrt(20/21)
# The tank needs to be wide enough for a hand to fit in to cap the launder.
W_MinChannel(ND_Pipe) := 2*SocketDepth(ND_Pipe)
W_ExitChannelMin := W_MinChannel(ND_SedLaunder) = 0.114 m
H_ExitChannel := H_InletChannel
HW_ExitChannel := HW_InletChannel - HL_SedLaunderBod
FindSide(Q, w, b, L, υ, ε, open) :=
    b ← W_InletChannel
    w ← b
    error ← 1
    while error > 0.001
        h_temp ← h_frect(Q, w, b, L, υ, ε, open)
        b ← b*(h_temp/HL_SedLaunderBod*Π_QSedTanks^2/(1 - Π_QSedTanks^2))^(1/4)
        w ← b
        error ← |h_temp/HL_SedLaunderBod - (1 - Π_QSedTanks^2)/Π_QSedTanks^2|
    return w
W_ExitChannelEst := max(FindSide(Q_Plant, W_InletChannel, W_InletChannel, L_Channel, Nu_Water, E_Concrete, 1), W_ExitChannelMin) = 0.147426 m
Geom_ExitChannel :=
    hl_weir ← Headloss_weir(Q_Plant, W_ExitChannelEst)
    Geom_Channel ← Perpindicular_Weir if (hl_weir ≤ HL_SedWeirMax)
    Geom_Channel ← Parallel_Weir otherwise
    return Geom_Channel
    = 0
W_SedWeirExit :=
    W_ExitChannelEst if Geom_ExitChannel == Perpindicular_Weir
    L_Channel otherwise
    = 0.147426 m
HL_SedWeirExit := Headloss_weir(Q_Plant, W_SedWeirExit) = 0.0811083 m
H_SedWeirExit := HW_ExitChannel - HL_SedWeirExit = 9.94748 cm
W_ExitChannel :=
    W_SedWeirExit if Geom_ExitChannel == Perpindicular_Weir
    (W_ExitChannelMin + T_SedWeir + w_minchannelHL(H_SedWeirExit, HW_ExitChannel, Q_Plant, L_Channel, Nu_Water, E_Concrete, 1, HL_SedWeirExit)) otherwise
    = 0.147426 m
L_SedLaunder := L_Sed - W_InletChannel - W_ExitChannel - T_ChannelWall
# The actual weir height is determined using the actual inner diameter of the pipe and the weir equation
H_PltWeir := HW_ExitChannel - Del_PltWeirH = 0.142794 m
# Lamella Design
H_SedAbove := outerdiameter(ND_SedLaunder) + HL_SedLaunder = 15.8689 cm
S_SedPlate := B_SedPlateMin - T_SedPlate = 1.7 cm
L_SedPlateEst :=
    L1 ← HW_InletChannel*cos(AN_SedPlate)
    L2 ← 0 m
    while |L1 - L2| > 0.01 m
        L_Inactive ← L1*cos(AN_SedPlate) + W_InletChannel + W_ExitChannel + 2*T_ChannelWall
        V_Up ← Q_Sed/(W_Sed*(L_Sed - L_Inactive))
        L2 ← (B_SedPlateMin*(V_Up/V_SedCBod - 1) + T_SedPlate)/(sin(AN_SedPlate)*cos(AN_SedPlate))
        L1 ← L2
    return L1
L_SedPlateEst = 0.357449 m
L_SedPlate := L_SedPlateSheet/floor(L_SedPlateSheet/L_SedPlateEst) = 0.36576 m
L_SedInactive := L_SedPlate*cos(AN_SedPlate) + W_InletChannel + W_ExitChannel + 2*T_ChannelWall
L_SedActiveMax := L_Sed - L_SedInactive = 3.33524 m
V_SedUpActiveBelow := Q_Sed/(W_Sed*(L_Sed - L_SedInactive))
B_SedPlate := (L_SedPlate*sin(AN_SedPlate)*cos(AN_SedPlate) - T_SedPlate)/(V_SedUpActiveBelow/V_SedCBod - 1) = 1.96236 cm
B_SedPlateHorizontal := B_SedPlate/sin(AN_SedPlate)
N_SedPlates := ceil(L_SedActiveMax/B_SedPlateHorizontal) + 1 = 149
H_SedPlate := L_SedPlate*sin(AN_SedPlate)
H_SedPlate = 0.316757 m
# Now calculate actual values of all parameters!
L_SedActive := L_Sed - L_SedInactive - N_SedPlates*T_SedPlate/sin(AN_SedPlate) = 2.81909 m
# Number of spaces where water is traveling is one less than the number of plates used to create those spaces
V_SedUp := Q_Sed/(L_Sed*W_Sed) = 70 m/day
V_SedUpActive := Q_Sed/(L_SedActive*W_Sed) = 105.507 m/day
V_SedC := V_SedUpActive/(1 + L_SedPlate/S_SedPlate*cos(AN_SedPlate)*sin(AN_SedPlate)) = 10.2272 m/day
HW_Sed := max(Z_SedSlopes + H_SedFrameWall + H_SedBetween + 2*outerdiameter(ND_SedPlateFrame) + H_SedPlate + H_SedAbove, H_SedManifoldPort + H_SedBetween + T_ChannelWall + H_InletChannel) = 1.44134 m
HW_Sed = 1.44134 m
Z_SedSlopes + H_SedFrameWall + H_SedBetween + 2*outerdiameter(ND_SedPlateFrame) + H_SedPlate + H_SedAbove = 1.44134 m
Z_SedSlopes = 0.799374 m
2*outerdiameter(ND_SedPlateFrame) = 0.09652 m
Z_SedSlopes = 0.799374 m
Z_SedSlopes + H_SedFrameWall + H_SedBetween + 2*outerdiameter(ND_SedPlateFrame) + H_SedPlate + H_SedAbove = 1.44134 m
H_SedBetween = 0
H_SedFrameWall = 0.07 m
H_SedFrameWall = 0.07 m
H_Sed := HW_Sed + H_PlantFreeboard
Z_Mp := HW_Sed - HW_InletChannel = 1.22076 m
Z_SedLaunder := HW_Sed - HL_SedLaunder - outerradius(ND_SedLaunder) = 1.3398 m
ZW_ExitChannel := HW_Sed - HL_SedLaunder = 1.39695 m
H_SedBayDivider := Z_SedSlopes + H_SedFrameWall
W_SedBayDivider := T_ChannelWall
Z_MP := HW_Sed - HW_InletChannel
# Launder Cap
# The size of the opening in the cap to allow the inflow of water into the sedimentation tank is determined by the Orifice Equation Q=A*K*(2*g*h)^.5 so that the flow rate through the cap is at most the flow rate out of the other sedimentation tanks.
H_LaunderCap := H_Sed - H_ExitChannel + HW_ExitChannel = 1.40134 m
A_CapOrifice := Q_Sed/(Pi_VenaContractaOrifice*sqrt(2*g*H_LaunderCap)) = 0.00095891 m^2
D_CapOrifice := sqrt(A_CapOrifice/(π/4)) = 0.0349417 m
L_LaunderCouplingPipe := T_PlantWall + CapHeight(ND_SedLaunder)
