# [reference: BasicInputs.xmcd]
# [reference: ExpertInputs.xmcd]
# [reference: MathFunctions.xmcd]
# [reference: PipeDatabase.xmcd]
# [reference: MinorLossCoefficients.xmcd]
# [reference: FluidsFunctions.xmcd]
# Questions:
# - What is the minimum allowable space between the slopes of the walls and the side of the inlet manifold pipe to avoid floc breakup and have good sed tank hydraulics?
# Sedimentation Tank
# Preliminary Dimension and Flow Calculations
# Maximum length of the upflow section of the sed tank is based on the maximum flow rate through the inlet manifold pipe to stay below the maximum energy dissipation rate to prevent floc breakup and the desired upflow velocity to maintain a floc blanket.
L_SedUpflowMax := Q_PipeED(ED_SedInlet, innerD(ND_SedManifoldMax, PS_Default), Pi_VenaContractaOrifice, Pi_Jet)/(V_SedUpBod*W_SedBay)
Q_Sed := Q_Plant/N_SedTanks = 0.006 m^3/s  # Flow rate through one sed tank.
# There is a minimum number of total sed bays required to maintain the desired upflow velocity in each sed tank given the maximum length calculated above.
N_SedBaysTotal := ceil(Q_Plant/(V_SedUpBod*W_SedBay*L_SedUpflowMax)) = 1
N_SedBaysMin := ceil(N_SedBaysTotal/N_SedTanks) = 1  # Minimum number of sed bays per sed tank given the minimum total number calculated above.
N_SedBays := max(N_SedBaysMin, N_SedBaysEst) = 2  # The number of bays per tank is the maximum of the calculated value and the user input
L_SedUpflow := Q_Sed/(W_SedBay*N_SedBays*V_SedUpBod)
# Actual length of the upflow section of the sed tank (not including the floc hopper) given the number of sed bays per sed tank.
W_Sed := N_SedBays*W_SedBay
Q_SedBay := Q_Sed/N_SedBays
ND_SedLaunder := ND_Manifold(Q_SedBay, HL_SedLaunderBod, L_SedUpflow, Pi_QLaunderOrifices, PS_Default, Nu_Water, E_Pvc, K_PipeExit, 2*floor(L_SedUpflow/B_SedLaunderOrificesEst))
# This is a very slightly conservative estimate on the size of the launder. Close enough that there is no need to recalcualte this diameter.
Q_SedManifold := Q_SedBay  # There is one manifold per bay
ND_SedManifold := NominalDiameter(D_PipeED(ED_SedInlet, Q_SedBay, Pi_VenaContractaOrifice, Pi_Jet), PS_Default)
# Inlet Channel Design
L_SedChannel := N_SedTanks*W_Sed + (N_SedTanks - 1)*T_PlantWall  # Length of the inlet channel, which runs along the entire width of the sed tanks.
# The area of the inlet channel must be large enough not to break up flocs
A_SedInletChannelED := A_Channel(Q_Plant, ED_SedInlet, Pi_VenaContractaOrifice, Pi_Jet)
HW_SedWeirExit := 2*ConRadius(ND_SedLaunder)
W_SedInletChannelPlumbing := 2*ConRadius(ND_SedManifold) + 2*S_SedInletChannelMin = 0.24415 m
HW_SedInletChannelPlumbing := HL_SedLaunderBod + 2*ConRadius(ND_SedLaunder) + T_ConcreteMin = 0.218587 m
[W_SedInletChannelPreWeir; HW_SedInletChannel] :=
    W ← W_SedInletChannelPlumbing
    HW ← HW_SedInletChannelPlumbing
    while W*HW < A_SedInletChannelED
        HW ← HW + 1 mm if HW < W
        W ← W + 1 mm otherwise
    return [W; HW]
H_SedInletChannel := HW_SedInletChannel + H_PlantFreeboard
EN_InletChannelGeom :=
    hl_weir ← Headloss_weir(Q_Plant, W_SedInletChannelPreWeir)
    Geom_Channel ← Perpendicular_Weir if (hl_weir ≤ HL_SedWeirMax)
    Geom_Channel ← Parallel_Weir otherwise
    return Geom_Channel
# This function determines the geometry of the weir based on the headloss through it. Hl.SedWeirMax is an expert input. 0-->Perpendicular, 1--> Parallel
W_SedWeirInlet :=
    W_SedInletChannelPreWeir if EN_InletChannelGeom == Perpendicular_Weir
    L_SedChannel otherwise
HL_SedWeirInlet := Headloss_weir(Q_Plant, W_SedWeirInlet) = 0.0127712 m
H_SedWeirInlet := HW_SedInletChannel + 2 cm = 0.275588 m
W_SedInletChannelPostWeir := max(W_ChannelMin, W_HorizChannel(Q_Plant, H_SedWeirInlet, HL_SedChannelMax, L_SedChannel, Nu_Water, E_Concrete, 1))
W_SedInletChannel :=
    W_SedInletChannelPreWeir if EN_InletChannelGeom == Perpendicular_Weir
    W_SedInletChannelPreWeir + T_SedWeir + W_SedInletChannelPostWeir if EN_InletChannelGeom == Parallel_Weir
V_SedInletChannel := Q_Plant/(W_SedInletChannelPreWeir*HW_SedInletChannel) = 0.184012 m/s
# This is the velocity in the part of the channel that delivers the flocs
L_SedEst := 4 m
ND_SedInletChannelDrain := NominalDiameter(D_PipeTotal(Q_Plant, HW_SedEst, HW_SedEst + L_SedEst, Nu_Water, E_Pvc, K_PipeEnt + K_PipeExit + K_El90), PS_Default) = 3 in
W_SedInletChannelDrainBox := max(2*S_Fitting + 2*ConRadius(ND_SedInletChannelDrain), W_SedInletChannelPostWeir)
# Exit Channel Design
ND_SedExitChannelDrain := NominalDiameter(D_PipeTotal(Q_Plant, HW_SedEst, HW_SedEst, Nu_Water, E_Pvc, K_PipeEnt + K_PipeExit + K_El90), PS_Default) = 3 in
H_SedExitChannel := H_SedInletChannel
HW_SedExitChannel := HW_SedInletChannel - HL_SedLaunderBod
W_SedExitChannelPreWeir := max(W_HorizChannel(Q_Plant, HW_SedExitChannel, HL_SedChannelMax, L_SedChannel, Nu_Water, E_Concrete, 1), W_ChannelMin)
W_SedExitChannelPostWeir := max(W_ChannelMin, W_HorizChannel(Q_Plant, H_SedWeirInlet, HL_SedChannelMax, L_SedChannel, Nu_Water, E_Concrete, 1))
EN_ExitChannelGeom :=
    hl_perpweir ← Headloss_weir(Q_Plant, max(W_SedExitChannelPreWeir, 2*S_Fitting + 2*ConRadius(ND_SedExitChannelDrain)))
    Geom_Channel ← Perpendicular_Weir if (hl_perpweir ≤ HL_SedWeirMax)
    Geom_Channel ← Parallel_Weir otherwise
    return Geom_Channel
W_SedWeirExit :=
    max(W_SedExitChannelPreWeir, 2*S_Fitting + 2*ConRadius(ND_SedExitChannelDrain)) if EN_ExitChannelGeom == Perpendicular_Weir
    L_SedChannel - 2*S_Fitting - 2*ConRadius(ND_SedExitChannelDrain) + W_SedExitChannelPostWeir otherwise
HL_SedWeirExit := Headloss_weir(Q_Plant, W_SedWeirExit)
H_SedWeirExit := HW_SedExitChannel - HL_SedWeirExit
W_SedExitChannel :=
    max(W_SedExitChannelPreWeir, 2*S_Fitting + 2*ConRadius(ND_SedExitChannelDrain)) if EN_ExitChannelGeom == Perpendicular_Weir
    max(W_SedExitChannelPreWeir + T_SedWeir + W_SedExitChannelPostWeir, 2*S_Fitting + 2*ConRadius(ND_SedExitChannelDrain)) otherwise
H_ExitChannelLaunder := H_SedWeirExit - outerdiameter(ND_SedLaunder)
W_SedExitChannelDrainBox := max(2*S_Fitting + 2*ConRadius(ND_SedExitChannelDrain), W_SedExitChannelPreWeir)
# Manifold Design
L_SedManifoldPipe := L_SedUpflow - S_Fitting - ConRadius(ND_SedManifold) - ElbowRadius(ND_SedManifold) - ConRadius(ND_SedManifold) + outerradius(ND_SedManifold)
L_SedUpflow/L_SedManifoldPipe = 1.15781
# This ratio accounts for the fact that the discharge per unit length of the manifold is slightly higher than V.SedUpBod*W.Sed.
# The width of the diffuser outlet is independent of the port spacing and thus can be calculated based on the flow per unit length of the diffuser pipe. There is a tiny inconsequential error introduced by the fact that the actual length of the slot is ultimately determined by an integer number of ports. It isn't worth correcting for that tiny error.
# both sides of the equation are the distance between ports.
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W_SedDiffuserOutlet := 2/Pi_VenaContractaOrifice^2*((Pi_Jet*W_Sed*V_SedUpBod/2*L_SedUpflow/L_SedManifoldPipe)^3/ED_SedInlet)^(1/4) = 5.32954 cm
# diffuser pipe must be smaller in diameter than the spacing of the ports (see equations to the right)
Pi_PvcStretch := 1.2
# This is the amount of stretch we can get from the PVC pipe in the transition from round to rectangular. Large stretch factors are not possible to create without tearing the PVC.
S_SedDiffuserMin := 2 cm  # Minimum spacing between diffuser pipes to provide place for short tabs
D_SedDiffuserMin := 2*(W_SedDiffuserOutlet + S_SedDiffuserMin)/(Pi_PvcStretch*π - 2) = 3.26078 in
ND_SedDiffuser := NominalDiameter(D_SedDiffuserMin, PS_Default) = 4 in
OD_Diffuser := 2*outerradius(ND_SedDiffuser) = 11.43 cm
Circ_SedDiffuser := π*innerdiameter(ND_SedDiffuser, PS_Default) = 0.329879 m  # This analysis doesn't account for thickness of the pipe wall
L_SedDiffuserOutlet := (Circ_SedDiffuser*Pi_PvcStretch - 2*W_SedDiffuserOutlet)/2
T_SedDiffuserWall := outerradius(ND_SedDiffuser) - innerdiameter(ND_SedDiffuser, PS_Default)/2
B_SedManifoldPort := L_SedDiffuserOutlet + 2*T_SedDiffuserWall/Pi_PvcStretch = 15.2379 cm
N_SedManifoldPorts := floor(L_SedManifoldPipe/B_SedManifoldPort) = 15
Q_SedManifoldPort := Q_SedBay/N_SedManifoldPorts = 0.2 L/s
D_SedManifoldPort := CeilNearest(D_PipeED(ED_SedInlet, Q_SedManifoldPort, Pi_VenaContractaOrifice, Pi_Jet), D_Drill) = 4.8 cm
# We need enough length to give the jet that is coming out of the manifold port to expand to the size of the rectangular slot
V_SedManifoldPort := Q_SedManifoldPort/(π*D_SedManifoldPort^2/4)*1/Pi_VenaContractaOrifice = 0.175435 m/s
V_SedDiffuser := Q_SedManifoldPort/(B_SedManifoldPort*W_SedDiffuserOutlet) = 0.0246273 m/s
V_SedManifoldPort/V_SedDiffuser = 7.12363
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L_SedDiffuserRoundjetanalogy := 6.2*V_SedManifoldPort/V_SedDiffuser*D_SedManifoldPort*sqrt(Pi_VenaContractaOrifice) = 1.68269 m  # round jet equation
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L_SedDiffuserPlanejetanalogy := (2.41*V_SedManifoldPort/V_SedDiffuser)^2*D_SedManifoldPort*sqrt(Pi_VenaContractaOrifice) = 11.2292 m  # plane jet
# Conclusion is that we should keep the manifold as high as possible based on the limitations of the elbow to give as much distance as possible for the jet to expand inside the diffuser pipe.
# End Slope
L_SedEndSlope := S_Fitting + ConRadius(ND_SedManifold) + ElbowRadius(ND_SedManifold) + SocketDepth(ND_SedManifold)
H_SedEndSlope := tan(AN_SedSlope)*L_SedEndSlope
# Sludge Drain
# This is the initial drain rate
# The factor of two is because the flow rate decreases linearly as the tank drain (for a constant cross section tank). Thus the average drain rate is 1/2 the initial drain rate.
Q_SedSludgeDrain := 2*W_SedBay*L_SedUpflow*HW_SedEst/Ti_SludgeDrain
N_SedSludgeOrificesEst := floor((L_SedUpflow - L_SedEndSlope)/B_SedSludgeOrificesEst) - 1 = 22
Q_SedSludgeOrificesEst := Q_SedSludgeDrain/N_SedSludgeOrificesEst
# This is the required diameter of the sludge drain if it were circular
# To get the effective "diameter" of the sludge drain manifold (the cross section will actually be a polygon) an approximate length for the portion of the sludge drain which runs under the floc hopper is assumed to be 1m and is entered in the manifold function as if its section had inlet holes as well. Since the effect of the additional length on the calculated "diameter" is very small, the accuracy of these assumptions is not very important.
D_SedSludgeChannel := D_Manifold(Q_SedSludgeDrain, HW_SedEst/3, L_SedUpflow - L_SedEndSlope, Pi_QSludgeOrifices, Nu_Water, E_Concrete, 0, N_SedSludgeOrificesEst) = 0.0752909 m
ND_SedSludgePipe := NominalDiameter(D_PipeTotal(Q_SedSludgeDrain, HW_SedEst/3, L_SedUpflow - L_SedEndSlope + L_FlocHopperEst, Nu_Water, E_Pvc, K_PipeExit + K_GateValve), PS_Default) = 0.0762 m
# Something is wrong with these diameter functions.
HL_SedSludgeEst := HL_Manifold(Q_SedSludgeDrain, D_SedSludgeChannel, L_SedUpflow + L_FlocHopperEst, 0, Nu_Water, E_Concrete, N_SedSludgeOrificesEst) + h_l(Q_SedSludgeDrain, innerdiameter(ND_SedSludgePipe, PS_Default), L_FlocHopperEst + ValveLength(ND_SedSludgePipe) + 10 cm, K_GateValve + K_PipeExit, Nu_Water, E_Pvc)
HL_SedSludgeOrificeEst := HW_SedEst - HL_SedSludgeEst = 1.74293 m
# The cross sectional area of the drain if it were circular
A_SedSludge := π/4*D_SedSludgeChannel^2
# Assume sludge drain square to keep width of sludge drain cover narrow
W_SedSludge := sqrt(A_SedSludge)
H_SedSludge := A_SedSludge/W_SedSludge
Z_SedSludge := H_SedSludge = 0.0667248 m  # Elevation of the top of the sludge drain channel (and the bottom of the drain cover).
# Sludge Drain Cover
# The jet reverser is the semi-circular trough in the center of the drain cover into which the jets from the inlet manifold discharge and re-suspend sludge. The concrete semi-circle will be cast using a length of PVC pipe.
#
# Jet reverser diameter should be at least 2x the width of the diffuser port
ND_SedJetReverser := NominalDiameter(W_SedDiffuserOutlet*2, PS_Default) = 6 in
S_ReversedHalfJet := (outerdiameter(ND_SedJetReverser) - W_SedDiffuserOutlet)/2 - (outerradius(ND_SedDiffuser) - innerdiameter(ND_SedDiffuser, PS_Default)/2) = 5.28416 cm
# This is the space between the lip of the jet reverser and the outer wall of the diffuser pipe through which the reversed jet must pass. Compare with the natural width of the reversed jet calculated next.
W_SedJet := W_SedDiffuserOutlet/2*Pi_VenaContractaOrifice^2 = 1.05765 cm
T_SedDrainCoverLedge := 2 cm
W_SedDrainCover := max(W_SedSludge + 2*T_SedDrainCoverLedge, outerdiameter(ND_SedJetReverser)) = 6.625 in
# The drain cover needs to be wide enough to rest on the ledges of the drain channel, and also needs to be at least as wide as the jet reverser.
L_SedDrainCoverSlopes := (W_SedDrainCover - outerdiameter(ND_SedJetReverser))/2
H_SedDrainCoverTotal := T_ConcreteMin + outerradius(ND_SedJetReverser) + L_SedDrainCoverSlopes*tan(AN_SedSlope) = 5.281 in
A_SedDrainCover := H_SedDrainCoverTotal*W_SedDrainCover - L_SedDrainCoverSlopes*tan(AN_SedSlope)*(2*L_SedDrainCoverSlopes + outerdiameter(ND_SedJetReverser)) - 1/2*π*outerradius(ND_SedJetReverser)^2
ρ_Concrete := 2400*kg/m^3
M_DrainCoverMax := 20 kg
S_SedDrainCoverSegment := 2 mm
L_SedDrainCoverTotal := L_SedUpflow - L_SedEndSlope = 2.3501 m
# L.SedDraincoverSegment should be modified so it is an integer number of manifold ports long.
L_SedDrainCoverSegmentMax := M_DrainCoverMax/(A_SedDrainCover*ρ_Concrete) = 0.727666 m
N_SedDrainCover := ceil(L_SedDrainCoverTotal/L_SedDrainCoverSegmentMax) = 4
L_SedDrainCoverSegment := L_SedDrainCoverTotal/N_SedDrainCover - S_SedDrainCoverSegment = 0.585526 m
B_SedSludgeOrifices := L_SedDrainCoverSegment/trunc(L_SedDrainCoverSegment/B_SedSludgeOrificesEst) = 11.7105 cm
# put an integer number of orifices in each drain cover segment
N_SedSludgeOrifices := floor(L_SedDrainCoverTotal/B_SedSludgeOrifices) = 20
D_SedSludgeOrifice := D_circle(A_orifice(HL_SedSludgeOrificeEst, Pi_VenaContractaOrifice, Q_SedSludgeDrain/N_SedSludgeOrifices)) = 1.07341 cm
# No need to round this because they don't drill this hole in concrete!
N_SedDrainCoverSegmentOrifices := floor(N_SedSludgeOrifices/N_SedDrainCover)
# Side Slopes
W_SedSideSlopes := (W_SedBay - W_SedDrainCover)/2
H_SedSideSlopes := tan(AN_SedSlope)*((W_SedBay - outerdiameter(ND_SedJetReverser))/2 - T_ConcreteMin) = 0.483688 m
# Manifold Vertical Position
# In the following manifold lift calculation, the first constraint will dominate since it raises the manifold up to the level of the floc weir to allow the diffusers to be as long as possible so the orifice jet can expand. The others are in case the manifold is lowered back down into the sloped section of the tank.
H_SedManifoldLift := max(H_SedFlocWeir - outerdiameter(ND_SedManifold), ConRadius(ND_SedManifold) - outerradius(ND_SedManifold), (outerradius(ND_SedManifold) + S_SedManToSlopeMin)/cos(AN_SedSlope) - outerradius(ND_SedManifold) - outerradius(ND_SedJetReverser)*tan(AN_SedSlope), ConRadius(ND_SedManifold)/cos(AN_SedSlope) - ConRadius(ND_SedManifold) - outerradius(ND_SedJetReverser)*tan(AN_SedSlope), (ElbowRadius(ND_SedManifold) + ConRadius(ND_SedManifold))/cos(AN_SedSlope) - ElbowRadius(ND_SedManifold) - outerradius(ND_SedManifold))
Z_SedManifoldPipe := Z_SedSludge + T_ConcreteMin + outerradius(ND_SedJetReverser) + outerradius(ND_SedManifold) + H_SedManifoldLift = 0.916725 m
L_SedManifoldDiffuser := H_SedManifoldLift = 0.631725 m
# Lamella Design and Tank Dimension Algorithm
B_SedPlate := B_SedPlateMin
N_SedModulePlatesMax := floor(L_SedPlateCantilevered/B_SedPlate*tan(AN_SedPlate) + 1) = 13
N_SedModulePlatesMin := 8
PlateIndex :=
    for j ∈ N_SedModulePlatesMin .. N_SedModulePlatesMax
        for i ∈ 0 .. 50
            matrix[i, j - N_SedModulePlatesMin] ← j*(i + 1)
    array ← matrix[:, 0]
    for j ∈ N_SedModulePlatesMin + 1 .. N_SedModulePlatesMax
        array ← stack(array, matrix[:, j - N_SedModulePlatesMin])
    array ← sort(array)
    i ← 0
    while i < (last(array) - 1)
        array ← stack(submatrix(array, 0, i, 0, 0), submatrix(array, i + 2, last(array), 0, 0)) if array[i] == array[i + 1]
        array ← submatrix(array, 0, i + 1, 0, 0) if (i + 1 == i + 2 and i + 2 == last(array))
        i ← i + 1
    return array
Z_SedLamellaBottom := Z_SedSludge + T_ConcreteMin + outerradius(ND_SedJetReverser) + H_SedFlocWeir + H_FlocWeirToLamella + outerdiameter(ND_SedPlateFrame) = 1.14912 m
# The following is the minimum possible vertical distance from the bottom of the plates themselves to the bottom of the outside walls of the channels.
H_LamellaToChannelInitial := max(Z_SedManifoldPipe + ElbowRadius(ND_SedManifold) + SocketDepth(ND_SedManifold) + CouplingLength(ND_SedManifold) - T_ChannelWall - Z_SedLamellaBottom, 0 m)
# Why not start the analysis with a good estimate of plate length?
# Given that the plate lengths are incrementing in discrete quantitites, why not have plates that are an integer number of centimeters long?
#
# We could add a centimeter of plate with each interation but the length of the plates gets corrected next so you won't end up with the integer number in the end anyway.
S_SedPlate := B_SedPlate - T_SedPlate = 0.025 m
[L_SedPlateEst; N_SedPlatesUnits; H_LamellaToChannelEst; L_WeirToEChanEst; V_SedCaptureUnits] :=
    H_LamToChan ← H_LamellaToChannelInitial
    V_c ← 100*mm/s
    L_PlateChanGap ← 1 m
    N_Plates ← 0 m
    L_Plate ← 0 m
    while V_c > V_SedCBod
        H_LamToChan ← H_LamToChan + 1 mm
        L_Plate ← (H_LamToChan + T_ChannelWall + H_ExitChannelLaunder - H_LamellaToLaunder - T_SedPlate*cos(AN_SedPlate))/sin(AN_SedPlate)
        L_WeirToEChan ← L_Plate*cos(AN_SedPlate)
        L_PlateArea ← L_SedUpflow - W_SedInletChannel - T_ChannelWall + H_LamToChan/tan(AN_SedPlate)
        N_Plates ← FloorNearest(L_PlateArea*sin(AN_SedPlate)/B_SedPlate, PlateIndex)
        V_SedActiveUp ← Q_SedBay/(W_SedBay*(N_Plates - 1)*S_SedPlate/sin(AN_SedPlate))
        V_c ← V_SedActiveUp*B_SedPlate/(L_Plate*sin(AN_SedPlate)*cos(AN_SedPlate) + S_SedPlate)
    return [L_Plate; N_Plates*m; H_LamToChan; L_WeirToEChan; V_c*s]
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V_SedCapture := V_SedCaptureUnits/s = 0.119891 mm/s
N_SedPlates := N_SedPlatesUnits/m
L_SedPlateEst = 0.600758 m
N_PlatesPerSheet := floor(L_SedPlateSheet/L_SedPlateEst) = 6
V_SedActiveUp := Q_SedBay/(W_SedBay*(N_SedPlates - 1)*S_SedPlate/sin(AN_SedPlate)) = 1.26612 mm/s
L_SedPlate := L_SedPlateSheet/N_PlatesPerSheet = 0.609667 m
V_SedCaptureCheck := V_SedActiveUp*B_SedPlate/(L_SedPlateEst*sin(AN_SedPlate)*cos(AN_SedPlate) + S_SedPlate) = 0.119891 mm/s
Z_SedChannelBottom := Z_SedLamellaBottom + L_SedPlate*sin(AN_SedPlate) + T_SedPlate*cos(AN_SedPlate) + H_LamellaToLaunder - H_ExitChannelLaunder = 1.63979 m
Z_SedWeirExit := Z_SedChannelBottom + H_SedWeirExit
L_PlateChannelGap := L_SedUpflow - W_SedInletChannel - T_ChannelWall - (N_SedPlates - 1)*B_SedPlate/sin(AN_SedPlate) - T_SedPlate/sin(AN_SedPlate) + (Z_SedChannelBottom - T_ChannelWall - Z_SedLamellaBottom)/tan(AN_SedPlate)
L_WeirToEChan := L_WeirToEChanEst - L_PlateChannelGap
N_SedPlates = 77
L_SedPlate = 60.9667 cm
Z_SedLamellaBottom = 1.14912 m
L_WeirToEChan = 0.252821 m
V_SedCapture = 0.119891 mm/s
0.7048 m
V_SedCBod = 0.12 mm/s
N_SedModules :=
    for i ∈ N_SedModulePlatesMin .. N_SedModulePlatesMax
        N ← N_SedPlates/i
        break if mod(N_SedPlates, i) == 0
    return N
H_Sed := Z_SedChannelBottom + H_SedInletChannel = 1.99538 m
N_SedModulePlates := N_SedPlates/N_SedModules
# This part of the code serves to draw the module pipe for the plate settlers. In order to understand the meaning of each value please refer to the autocad drawing Lamina.Explanation
L_SedModulePipeIncrement := B_SedPlate - T_SedPlate - (CapDiameter(NominalPipeSize(ND_SedModulePipeSpace))/2 - outerradius(NominalPipeSize(ND_SedModulePipeSpace)))
# This is the part of the pipe sticking out that the cap is fitted on. The cap will serve as a resting spot for the next module. The modules are identical so they can be interchangeable.
L_SedModulePipe := N_SedModulePlates*B_SedPlate - (B_SedPlate - T_SedPlate) + 2*L_SedModulePipeIncrement = 0.315333 m  # This is the length of a sed module pipe.
S_SedModulePipes := max(L_SedPlate - 2*outerdiameter(ND_SedModulePipe) - 2*S_SedPlateModuleMin - (N_SedModulePlates*(T_SedPlate + (B_SedPlate - T_SedPlate)) - (B_SedPlate - T_SedPlate))/tan(AN_SedPlate), (L_SedModulePipe - L_SedModulePipeIncrement)*tan(90 deg - AN_SedPlate) + CapDiameter(NominalPipeSize(ND_SedModulePipeSpace))) = 0.369955 m
# This is the actual spacing between the pipes.
L_SedModulePipeCap := min(B_SedPlate - T_SedPlate, CapHeight(NominalPipeSize(ND_SedModulePipeSpace)) - (CapDiameter(NominalPipeSize(ND_SedModulePipeSpace))/2 - outerradius(NominalPipeSize(ND_SedModulePipeSpace))))
# The cap should be as long as the spacing between the two modules. If it is longer, we will need to cut it accordingly.
S_SedPlateModule := (L_SedPlate - S_SedModulePipes - (L_SedModulePipe - 2*L_SedModulePipeIncrement)/tan(AN_SedPlate))/2 = 0.041336 m
# This is the new spacing between the bottom of the first plate settler in a module and the first pipe.
.
L_SedActive := N_SedPlates*B_SedPlate/sin(AN_SedPlate) - T_SedPlate/sin(AN_SedPlate) = 2.39831 m
# Total Length
L_Sed := L_SedUpflow + L_WeirToEChan + T_ChannelWall + W_SedExitChannel = 3.4306 m
# This is slightly higher than our previous value and thus this sed tank is SLIGHTLY smaller than our previous algorithm. This is EXCELLENT!
V_SedUpCompare := Q_SedBay/(L_Sed*W_SedBay) = 0.809706 mm/s
# Exit Launder
B_SedLaunderOrifices := B_SedLaunderOrificesEst
Z_SedLaunder := Z_SedChannelBottom + H_SedWeirExit - outerradius(ND_SedLaunder) = 1.78526 m
L_SedLaunder := L_Sed - W_SedInletChannel - T_ChannelWall - W_SedExitChannel - CouplingLengthFlex(ND_SedLaunder) + SocketDepthFlex(ND_SedLaunder) - max(T_ChannelWall, CouplingLength(ND_SedLaunder) - T_ChannelWall) - ConRadius(ND_SedLaunder) + outerradius(ND_SedLaunder)
# There will be two orifices per row along the active length of the launder
N_SedLaunderOrifices := 2*floor((L_SedLaunder - SocketDepth(ND_SedManifold) - SocketDepthFlex(ND_SedManifold))/B_SedLaunderOrifices) = 44
Q_SedLaunderOrifices := Q_SedBay/N_SedLaunderOrifices
# This the HL due to major & minor losses loses through the manifold.
HL_SedLaunderMajor := HL_Manifold(Q_SedBay, innerdiameter(ND_SedLaunder, PS_Default), L_SedLaunder, 0, Nu_Water, E_Pvc, N_SedLaunderOrifices)
HL_SedLaunderOrificeEst := HL_SedLaunderBod - HL_SedLaunderMajor = 0.0387519 m
D_SedLaunderOrifice := RoundNearest(D_circle(A_orifice(HL_SedLaunderOrificeEst, Pi_VenaContractaOrifice, Q_SedLaunderOrifices)), D_Drill) = 1.3 cm
# This is the total headloss through the launder based on the actual diameter of the orifices
HL_SedLaunderOrifice := h_orifice(D_SedLaunderOrifice, Pi_VenaContractaOrifice, Q_SedLaunderOrifices) = 3.38963 cm
HW_Sed := Z_SedLaunder + outerradius(ND_SedLaunder) + HL_SedLaunderOrifice = 1.87631 m
# Floc Weir, Hopper, and Hopper Drain
Z_SedFlocWeir := Z_SedSludge + T_ConcreteMin + outerradius(ND_SedJetReverser) + H_SedFlocWeir
L_SedHopper := L_WeirToEChan - T_ConcreteMin + T_ChannelWall + W_SedExitChannel = 0.602821 m
# The length of the floc hopper not including the narrow flat ledge at the top of the weir.
ND_SedHopperDrain := 1 in
L_SedHopper + T_ConcreteMin + L_PlateChannelGap = 700.379 mm
704.8 mm
L_SedHopperFrontSlope := min((H_SedFlocWeir - ElbowRadius(ND_SedHopperDrain))/tan(AN_SedSlope), L_SedHopper) = 0.602821 m
H_SedHopperFrontSlope := L_SedHopperFrontSlope*tan(AN_SedSlope)
T_SedPlate/sin(AN_SedPlate) = 2.3094 mm
Z_SedSludge + H_SedFlocWeir = 866.725 mm
Z_SedHopperBottom := Z_SedSludge + H_SedFlocWeir - H_SedHopperFrontSlope = 14.831 cm
H_SedHopperBackSlope := min((L_SedHopper - L_SedHopperFrontSlope)*tan(AN_SedSlope), Z_SedChannelBottom - Z_SedHopperBottom)
L_SedHopperBackSlope := H_SedHopperBackSlope/tan(AN_SedSlope)
Z_SedHopperBottom = 14.831 cm
L_SedHopperExcess := L_SedHopper - L_SedHopperFrontSlope - L_SedHopperBackSlope = 0 m
Q_SedHopperDrainMax := Q_pipetotal(innerdiameter(ND_SedHopperDrain, PS_Default), HW_Sed - Z_SedHopperBottom, L_SedHopper - L_SedHopperFrontSlope + max(CouplingLength(ND_SedHopperDrain), T_PlantWall) + ValveLength(ND_SedHopperDrain) + π/4*ElbowRadius(ND_SedHopperDrain), Nu_Water, E_Pvc, K_PipeEnt + K_PipeExit + K_GateValve) = 2.8154 L/s
Q_SedHopperDrainMax = 2.8154 L/s
L_SedHopperDrainPipe := L_SedHopper - L_SedHopperFrontSlope + T_PlantWall - CouplingLength(ND_SedHopperDrain) + SocketDepth(ND_SedHopperDrain)
# Plate Pipe Frame
H_SedFrameStub := ((B_SedPlate - T_SedPlate)/sin(AN_SedPlate) - outerdiameter(ND_SedFrameStub))*tan(AN_SedPlate)
B_SedFrameStub := B_SedPlate/sin(AN_SedPlate)*N_SedModulePlates
