# PF-Sedimentation Tank
# Number of sed tanks
Q_Sed := 1*L/s
N_SedTank := Q_Plant/Q_Sed
ID_SedTank := ID(36 in, SDR_26)
# Inlet manifold diffuser design for energy dissipation rate
W_SedDiffuserInner := 1/8*in = 0.125 in
ED_SedInlet := (Pi_JetPlane*V_SedUpBod*ID_SedTank)^3/W_SedDiffuserInner^4
# Max Energy dissipation rate at center of tank, this ED goes down
# as you move away from the center
PS_SedDiffuser := SDR_26
PS_SedDiffuserStr := PSToString(PS_SedDiffuser)
T_SedDiffuserPvc := (OD(ND_SedDiffuser) - ID(ND_SedDiffuser, PS_SedDiffuser))/(2*Pi_PvcStretch)
Circ_SedDiffuserInner := Pi_PvcStretch*π*ID(ND_SedDiffuser, PS_SedDiffuser)
L_SedDiffuserInner := (Circ_SedDiffuserInner - 2*W_SedDiffuserInner)/2
L_SedDiffuserOuter := L_SedDiffuserInner + 2*T_SedDiffuserPvc
B_SedDiffuser := Ceil(L_SedDiffuserOuter, 1 cm)
V_SedDiffuser := V_SedUpBod*ID_SedTank*B_SedDiffuser/(W_SedDiffuserInner*(B_SedDiffuser - 2*T_SedDiffuserPvc))
HL_SedDiffuser := V_SedDiffuser^2/(2*g)
S_Fitting =  # error: This variable is undefined.  # For the shim stock connecting the inner pieces
N_SedDiffuser := floor((ID_SedTank - B_SedDiffuser - S_Fitting)/B_SedDiffuser)
Q_SedDiffuser := Q_Sed/N_SedDiffuser
PS_SedMan := SDR_41
PS_SedManStr := PSToString(PS_SedMan)
Q_SedManifoldMaxED := Q_PipeED(ED_SedInletMax, ID(ND_SedManifoldMax, PS_SedMan), Pi_VCOrifice, Pi_JetRound)
V_SedManifoldMaxFlowDist := sqrt(((1 - Pi_QSedInlet^2)/(Pi_QSedInlet^2 + 1))*4*g*HL_SedDiffuser)
Q_SedManifoldMaxFlowDist := π*IR(ND_SedManifoldMax, PS_SedMan)^2*V_SedManifoldMaxFlowDist
Q_SedManifoldMax := min(Q_SedManifoldMaxED, Q_SedManifoldMaxFlowDist)
ND_SedManifold := ND_Min((4/π*Q_Sed/V_SedManifoldMaxFlowDist)^(1/2), PS_SedMan)
B_SedLaunderOrificesEstPF := 3.5 cm
N_SedLaunderOrifices := floor(ID_SedTank/B_SedLaunderOrificesEstPF)
L_SedLaunder := ID_SedTank
ND_SedLaunder := ND_Manifold(Q_Sed, HL_SedLaunderBod, ID_SedTank, Pi_QLaunderOrifices, SDR_26, Nu_Water, E_Pvc, K_El90 + K_TeeFlowRun, N_SedLaunderOrifices)
PS_SedLaunder := PS_Decision(ND_SedLaunder)
PS_SedLaunderStr := PSToString(PS_SedLaunder)
Q_SedLaunderOrifice := Q_Sed/N_SedLaunderOrifices
D_SedLaunderOrifice := RoundNearest(D_circle(A_orifice(HL_SedLaunderBod, Pi_VCOrifice, Q_SedLaunderOrifice)), D_Drill)
HL_SedLaunderOrifice := h_orifice(D_SedLaunderOrifice, Pi_VCOrifice, Q_Sed/N_SedLaunderOrifices)
HL_SedLaunderMajor := HL_Manifold(Q_Sed, ID(ND_SedLaunder, PS_SedLaunder), L_SedLaunder, 0, Nu_Water, E_Pvc, N_SedLaunderOrifices)
HL_SedLaunder := HL_SedLaunderOrifice + HL_SedLaunderMajor
# Inlet manifold and launder diameters
# Inlet Distribution System
# Before Sed Tank
# Remember Drain where sed tank distribution manifold Velocity is lowest
ND_SedDistributionManifoldGuess :=
    ND_SedDistributionManifoldGuess ← 3 in if Q_Plant ≥ 1*L/s
    ND_SedDistributionManifoldGuess ← 4 in if Q_Plant ≥ 2*L/s
    ND_SedDistributionManifoldGuess ← 6 in if Q_Plant ≥ 3*L/s
L_ToInletGuess := 55 cm
# This should be the length of an adaptor from the distribution manifold size to the sed inlet manifold size plus a fernco. See W.FloctoSed variable from floc file
K_ToInlet := (ID(ND_SedDistributionManifoldGuess, SDR_26)^2/(Pi_VCOrifice*ND_SedManifold^2) - 1) + K_TeeFlowRun + 2*K_El90
HL_ToInlet := h_l(Q_Sed, ND_SedManifold, L_ToInletGuess, K_ToInlet, Nu_Water, E_Pvc)  # Head loss from distribution manifold to Sed tank inlet manifold size.
# After Sed Tank
B_SedTank := 10 cm
H_SedGuess := 1.9 m
L_ToSedUnion := ID_SedTank + (N_SedTank - 1)*B_SedTank + H_SedGuess  # Review Case with just 1 Sed Tank
K_ToSedUnion := 2*K_El90 + K_TeeFlowBr  # Conservative K for union of multiple lines
HL_ToSedUnion := h_l(Q_Sed, ND_SedLaunder, L_ToSedUnion, K_ToSedUnion, Nu_Water, E_Pvc)
# Pressure Recovery Check in Distribution Manifold
Pi_QSedTanks := 0.95
Pi_SedDistributionManifoldHeadLoss := 1 - Pi_QSedTanks^2 = 0.0975
PR_SedDistributionManifold := (Q_Plant/(π/4*ID(ND_SedDistributionManifoldGuess, SDR_26)^2))^2/(2*g)
HL_DownStreamPathMin := PR_SedDistributionManifold/Pi_SedDistributionManifoldHeadLoss
# Downstream headloss has to be at least this much
# to assure equitable flow distribution due to pressure
# recovery
HL_SedLaunder + HL_SedDiffuser + HL_ToInlet + HL_ToSedUnion =  # error
# Distribution Manifold Sizing
Pi_QSedTanks = 0.95
HL_SedDistributionManifoldMax := (HL_SedLaunder + HL_SedDiffuser + HL_ToInlet + HL_ToSedUnion)*(1 - Pi_QSedTanks^2)
K_SedDistributionManifoldPipe := 0
L_SedDistributionManifold := N_SedTank*(ID_SedTank + B_SedTank)
# Path Flow Differences
HL_MajorMax := h_f(Q_Plant/N_SedTank, ID(ND_SedDistributionManifoldGuess, SDR_26), L_SedDistributionManifold, Nu_Water, E_Pvc)
HL_MajorMin := h_f(Q_Plant/N_SedTank, ID(ND_SedDistributionManifoldGuess, SDR_26), 0, Nu_Water, E_Pvc)
HL_MinorElbow := h_e(Q_Plant/N_SedTank, ID(ND_SedDistributionManifoldGuess, SDR_26), K_El90)
# Difference between minor losses is small
HL_MinorTeeFlowBreak := h_e(Q_Plant/N_SedTank, ID(ND_SedDistributionManifoldGuess, SDR_26), K_TeeFlowBr)
HL_MinorTeeFlowRun := h_e(Q_Plant/N_SedTank, ID(ND_SedDistributionManifoldGuess, SDR_26), K_TeeFlowRun)
Path1 := HL_MajorMax + HL_MinorElbow + (HL_SedLaunderBod + HL_SedDiffuser + HL_ToInlet + HL_ToSedUnion)
Path2 := HL_MinorTeeFlowBreak + (HL_SedLaunderBod + HL_SedDiffuser + HL_ToInlet + HL_ToSedUnion)
Path3 := HL_MinorTeeFlowRun + (HL_SedLaunderBod + HL_SedDiffuser + HL_ToInlet + HL_ToSedUnion)
Pi_Actual := sqrt(min(Path1, Path2, Path3)/max(Path1, Path2, Path3))
ND_SedDistributionManifold := max(ND_SedDistributionManifoldGuess, ND_PipeFlow(Q_Plant, SDR_26, HL_SedDistributionManifoldMax, L_SedDistributionManifold, Nu_Water, E_Pvc, K_SedDistributionManifoldPipe))
HL_DrainMaxSedDistribution := 1.5 m
ND_DistributionManifoldDrain := ND_PipeFlow(Q_Plant, SDR_26, HL_DrainMaxSedDistribution, L_SedDistributionManifold, Nu_Water, E_Pvc, 3*K_El90)
# Sed to Filter Connections
# A sed drain valve off the external part of each sed launder pipe will serve to dump settled water from an individual sed tank if necessary.  After the vavle, we will connect the drain from all sed tanks to allow for a single waste from the plant.
#
# An overflow pipe above the sed launder will function as the filter overflow weir in the plant.  It will ensure that if one filter has a full entrance box, the other filter is not treating a flow rate over its filtration capacity. Thus this height will be set so that anything over 1.15Q.Fi through one Sed to Filter path will overflow.
Q_Fi := Q_Plant/N_Fi
Q_FiMaxPi := 1.25*Q_Fi  # This has to be bigger than Q.FiBw/Q.Fi
HL_ToSedUnion =  # error
ND_FilterDistribution := 2 in  # This is the pipe size after the union
L_FilterDistributionGuess := 1.5 m
K_FilterDistribution := K_TeeFlowBr + 2*K_El90 + K_PipeExit
HL_FromUnionToFilterMax := h_l(Q_FiMaxPi, ID(ND_FilterDistribution, SDR_26), L_FilterDistributionGuess, K_FilterDistribution, Nu_Water, E_Pvc)
HL_FromUnionToFilterNormalFlow := h_l(Q_Fi, ID(ND_FilterDistribution, SDR_26), L_FilterDistributionGuess, K_FilterDistribution, Nu_Water, E_Pvc)
# This is the water height over the launder orifices where the sed tanks will start to bypass the filters.  This simulates the case where one filter box is full.  This also assures that the other filter never receives more than 1.15Q.Fi
H_FiBypassAboveLaunder := HL_SedLaunder + (HL_FromUnionToFilterMax - HL_FromUnionToFilterNormalFlow)
HL_SedToFilterNormalFlow := HL_SedLaunder + HL_ToSedUnion + HL_FromUnionToFilterNormalFlow
HL_FiByPassMax := 5 cm
L_FiByPassEst := 3 m
K_FiByPassEst := K_PipeEnt + 2*K_El90
ND_FiByPass := ND_PipeFlow(Q_Sed, SDR_26, HL_FiByPassMax, L_FiByPassEst, Nu_Water, E_Pvc, K_FiByPassEst)
HL_SedLaunderDrainMax := HL_SedLaunder + HL_ToSedUnion + HL_FromUnionToFilterNormalFlow
ND_SedLaunderDrain := ND_PipeFlow(Q_Sed, SDR_26, HL_SedLaunderDrainMax, 1 m, Nu_Water, E_Pvc, K_El90)
L_SedToFilterConnectionMin := TeeLength(ND_SedLaunder) + 1*ElbowRadius(ND_FilterDistribution) + 3*ShortTeeLength(ND_FilterDistribution) + S_Fitting
# Hopper length
ND_FlocHopper := 3 in
Vol_FlocHopperTarget := 15 cm^3
# What should our target Floc Hopper Volume be?
# Does this even matter?
L_FlocHopper := Vol_FlocHopperTarget/(ND_FlocHopper^2*π/4) = 0.328921 cm
AN_FlocHopper := 45 deg  # What should this angle be?
# Plate Settlers
# Spacing Design
S_SedPlate =  # error
B_SedPlate =  # error
Theta := 30 °  # Angle of sed tank
L_Aaxis := ID_SedTank/cos(Theta)/2
W_Baxis := ID_SedTank/2
Area_ElipsePlanView := L_Aaxis*W_Baxis*π  # Plan view area of Ellipse
V_SedUpBodActual := Q_Sed/Area_ElipsePlanView  # Calculate actual V.SedUpBod
L_SedPlate := Ceil((S_SedPlate*(V_SedUpBodActual/V_SedCBod - 1) + T_SedPlate*V_SedUpBodActual/V_SedCBod)/(sin(AN_SedPlate)*cos(AN_SedPlate)), 10 cm)
N_SedPlates := floor(ID_SedTank/B_SedPlate)
V_Cap(L, S) := S/(L*sin(π/3)*cos(π/3) + S)*V_SedUpBodActual*(S + T_SedPlate)/S
V_Cap := V_Cap(L_SedPlate, S_SedPlate)
# Plate settler width Design
ThetaChord(r, y) := acos((r - y)/r)
Width(r, y) := 2*r*sin(ThetaChord(r, y))
Tolerance := 0.5 cm
Array_Spacing := ID_SedTank/2, ID_SedTank/2 - B_SedPlate .. 0 cm
# Only fabricate one of the first size (the chord along the diamter)
# Fabricate two of every other size
W_SedPlates := Tolerance + Width(ID_SedTank/2, Array_Spacing)
A_Plates := L_SedPlate*W_SedPlates
A_TotalSedPlates := N_SedTank*(2*sum(A_Plates) - A_Plates[0])
A_Sheet := 4 ft*8*ft = 2.9729 m^2
N_Sheet := ceil(A_TotalSedPlates/A_Sheet) + N_SedTank  # N.SedTank added for extra
# Elevations
AN_SedSlope =  # error
H_JetReverser := 0.5*OD(3 in)
Z_JetReverser := H_JetReverser
H_SedSlope := (ID_SedTank/2 - 0.5*OD(3 in))*tan(AN_SedSlope)
Z_SedSlope := Z_JetReverser + H_SedSlope
L_SedSlope := H_SedSlope/sin(AN_SedSlope)
L_SedSlopeEllipseAxisA := L_SedSlope
W_SedSlopeEllipseAxisB := ID_SedTank/2
A_SedSlopeOrder := L_SedSlopeEllipseAxisA*W_SedSlopeEllipseAxisB
H_CutToSedPlateBottom := ID_SedTank*tan(15 deg)
# This is the height given the 15 degree cut before the plate settlers can start.  This space can probably be used as floc blanket space
# This variable renames H_SedSlopesToFlocWeirMin=25cm which we use in the full scale plant.  Here it represents the space above the sed slopes and before the sed tank cut line.  This value can be reduced given the gap H_CutToSedPlateBottom = created by the cut for the sed tank, and the floc hopper can be extended into this gap.
# Later made this value larger to make the sed tank slightly taller to facilitate the filter.
H_BeforeCut := 15 cm
Z_CutTall := Z_SedSlope + H_BeforeCut + H_CutToSedPlateBottom
H_FlocBlanketToPlateSettler := 10 cm  # Gap from Floc blanket to plate settlers
H_FlocBlanket := H_BeforeCut + H_CutToSedPlateBottom - H_FlocBlanketToPlateSettler  # This is the total height of the floc blanket above the sed slopes
Z_FlocBlanketBottom := Z_SedSlope
H_SedSlopeToPlateSettler := H_FlocBlanket + H_FlocBlanketToPlateSettler
Z_FlocBlanketTop := Z_FlocBlanketBottom + H_FlocBlanket
Z_PlateSettlerBottom := Z_FlocBlanketTop + H_FlocBlanketToPlateSettler
H_BottomPieceTall := H_JetReverser + H_SedSlope + H_BeforeCut + H_CutToSedPlateBottom
H_BottomPieceSmall := H_JetReverser + H_SedSlope + H_BeforeCut
L_SedManifoldDiffuser =  # error
H_SedInlet := H_JetReverser + H_JetReverserToDiffusers + L_SedManifoldDiffuser
Z_SedInlet := H_SedInlet
H_PlateSettler := L_SedPlate*cos(Theta)
Z_PlateSettlerTop := Z_PlateSettlerBottom + H_PlateSettler
H_LamellaToLaunder =  # error  # Space between the top of the plate settlers and the bottom of the launder pipe
H_Launder := OD(ND_SedLaunder)
Z_SedLaunderTop := Z_PlateSettlerTop + H_LamellaToLaunder + H_Launder
H_FiBypassAboveLaunder =  # error
H_ByPass := OD(ND_FiByPass)
Z_FiByPassTop := Z_SedLaunderTop + H_FiBypassAboveLaunder + H_ByPass
HL_FiByPassMax = 0.05 m
H_Safety := 5 cm
H_SedTankTopPiece := H_PlateSettler + H_LamellaToLaunder + H_Launder + H_FiBypassAboveLaunder + H_ByPass + HL_FiByPassMax + H_Safety
Z_SedTop := Z_FiByPassTop + HL_FiByPassMax + H_Safety
HW_SedTank := Z_SedLaunderTop + HL_SedLaunder
L_BottomPieceLong := H_BottomPieceTall
L_BottomPieceShort := H_BottomPieceSmall
L_TopPieceTallAfterCut := H_SedTankTopPiece/cos(Theta)
100*gal/min = 6.30902 L/s
L_TopPieceCut := 2*L_Aaxis*sin(Theta)
L_TopPieceTall := L_TopPieceCut + L_TopPieceTallAfterCut
L_TopPieceShort := L_TopPieceTallAfterCut + L_TopPieceCut - H_CutToSedPlateBottom
L_Total := L_TopPieceShort + L_BottomPieceLong
L_TotalCheck := L_TopPieceTall + L_BottomPieceShort
H_SedTank := H_BottomPieceTall + H_SedTankTopPiece
Z_FilterEntranceExit := HW_SedTank - HL_SedLaunder - HL_ToSedUnion - HL_FromUnionToFilterNormalFlow
1.5*H_Safety = 0.075 m
Z_FilterMax := Z_FilterEntranceExit - 1.5*H_Safety
# 1.5 H Safety is the height of the free fall.
# Maybe this should also take into account the worst case scenario when trying to fill up the filter body with a dirty filter bed headloss also included.  This would lower the filter body another ~20 cm. Perhaps it is better to waste water while filling up the filter more slowly for this extreme case than to pay the capital cost of lowering the filter another 20cm.
W_SedTank := OD(36 in) + L_TopPieceShort*cos(2*Theta)
# Residence Time Estimate
Vol_SedActiveEst := ID_SedTank^2/4*π*2*m
Ti_Sed := Vol_SedActiveEst/Q_Sed
# Materials
L_SedTotal := L_Total*N_SedTank
A_TotalSedPlates =  # error
N_Sheet =  # error
A_SedSlopeOrder =  # error
# Sed to Filter Distribution System
N_TeeSedToFilter := N_SedTank + (N_Fi - 1) + (N_SedTank - 1)  # 2 more for sed tank connections
N_ReductorSedDrain := N_SedTank
ND_SedLaunderDrain =  # error
N_ValveSedDrain := N_SedTank
N_El90 := 2*N_SedTank + 1 + N_Fi  # 1 for drain
N_SedCross := 1  # Evaluate this when more than 3 sed tanks or less than 3 sed tanks...
