# Sludge Drain Program
HL_Valve := 0.8*HW_SedEst
# Here we are assuming that we are willing to use up to 80% of the available energy to get the flow through the valve and discharge it to atmosphere.
Q_SedSludgeDrain := W_SedBay*L_Sed*HW_SedEst/(0.5*Ti_SludgeDrain)  # This is the initial drain rate
# The manifold ports alternate from side to side and thus there is one port every W.SedSlopePlate/2.
B_SedSludgeOrifices := W_SedSlopePlate/2
N_SedSludgeOrifices := floor(L_Sed/B_SedSludgeOrifices)  # This is per Sed Bay
Q_SedSludgeOrifices := Q_SedSludgeDrain/N_SedSludgeOrifices
ND_SedSludgeValve := D_pipeschedule(Q_SedSludgeDrain, EN_PipeSpec, HL_Valve, T_PlantWall, Nu_Water, E_Pvc, K_GateValve + K_PipeExit)
# This pipe is actually longer than the thickness of the plant wall. This is not a significant error since major losses are small, but we could eventually see if we can define this more accurately.
HL_Valve := h_e(Q_SedSludgeDrain, innerdiameter(ND_SedSludgeValve, EN_PipeSpec), K_GateValve + K_PipeExit)
# This is the actual head loss through the valve given its diameter
HL_SludgeDrain := HW_SedEst - HL_Valve
ID_SedSludge := ID_Manifold(Q_SedSludgeDrain, HL_SludgeDrain, L_Sed, Pi_QSludgeOrifices, EN_PipeSpec, Nu_Water, E_Concrete, 0, N_SedSludgeOrifices)
# This is the required diameter of the sludge drain if it were circular
HL_SedSludgeEst := HL_Manifold(Q_SedSludgeDrain, ID_SedSludge, L_Sed, 0, Nu_Water, E_Concrete, N_SedSludgeOrifices)
HL_SedSludgeOrificeEst := HL_SludgeDrain - HL_SedSludgeEst
D_SedSludgeOrifice := RoundNearest(D_circle(A_orifice(HL_SedSludgeOrificeEst, Pi_VenaContractaOrifice, Q_SedSludgeOrifices)), D_Drill)
A_SedSludge := π/4*ID_SedSludge^2
W_SedSludge := sqrt(2*A_SedSludge)  # Assume sludge drain is twice as wide as it is high (to save depth in the sed tank)
H_SedSludge := A_SedSludge/W_SedSludge
T_SedSludge := T_SedInletSlope*(1 + sin(AN_SedTopInlet))
W_SedDrainCover := W_SedSludgeFlat + 2*W_SedSludgeSF + 2*T_SedInletSlope/sin(AN_SedTopInlet)
W_SedInletBottom := W_SedBayActual/2 - W_SedDrainCover/2
Z_SedSludge := T_SedSludge + H_SedSludge
H_SedTopSlope := W_SedInlet*tan(AN_SedTopInlet)
H_SlopeThickness := T_SedInletSlope/cos(AN_SedTopInlet)
Z_SedSlopes := Z_SedSludge + H_SedTopSlope
