# [reference: BasicInputs.xmcd]
# [reference: ExpertInputs.xmcd]
# [reference: MathFunctions.xmcd]
# [reference: PipeDatabase.xmcd]
# [reference: FluidsFunctions.xmcd]
# [reference: SedimentationTank.xmcd]
# [reference: Flocculator.xmcd]
# [reference: LFOM.xmcd]
# [reference: LinearCdc.xmcd]
# [reference: ChemStorageTanks.xmcd]
# [reference: EntranceTank.xmcd]
T_FiWall := 25 cm
ND_FiKeyPipe := 1.5 in
# Design References
# Schedule 40 or Schedule 80 for slotted branches????? Schedule 40 has larger ID and that increases the max flow rate it can handle and thus increases the allowable width of the filter. Schedule 40 for strength and servicability. This changes the dimensions of the filter box and the constraints for the entrance and exit boxes.
Q_Plant = 32 L/s
PS_FiBranch := 2
EN_PipeSpecDescription[PS_FiBranch] = "Schedule 40"
Nu_Air := 12*mm^2/s
H_FiSiphonNoSuckAir := 10 cm  # Minimum depth over the orifices in the siphon manifold so that there is standing water and air is not entrained.
H_FiFluidizedBedToSiphon := 20 cm
H_FiBwNoSuckAir := 20 cm  # Minimum depth in the entrance box during backwash such that there is standing water over the inlet.
## Constraints
# Max head loss through inlet piping during filtration
# Max head loss through inlet piping during backwash
# Max head loss through outlet piping during filtration
# Max head loss through outlet piping during backwash (siphon)
# Max ratio of head loss in manifold to head loss through filter layer during filtration
# Max ratio of head loss in manifold to head loss through filter layer during filtration
## Filter Bed Sizing
# List the assumed properties of the sand in the filter
# The listed properties include the diameter of sand, density of a sand grain, density of water,
# and the porosity of a sand bed.
D_FiSandES := 0.5 mm
Pi_UCFiSand := 1.65
D_FiSand60 := D_FiSandES*Pi_UCFiSand = 0.825 mm
ε_FiSand := 0.4  # Porosity in a sand bed
Rho_Water := 1000*kg/m^3  # Density of sand and water, respectively
Rho_FiSand := 2650*kg/m^3
# Select the stacked filter configuration and backwash velocity
V_FiBw := 11*mm/s  # Design guidelines say 11 mm/s. The success of lab-scale backwashing at 10 mm/s suggests that this is a reasonable and conservative value
N_FiLayer := 6
Pi_FiFluidized := 1.3  # Bed expands 30% when fluidized
# Calculate the required filtration velocity and filter area
V_FiLayer := V_FiBw/N_FiLayer = 1.83333 mm/s
# The 1.83 mm/s velocity was tested on the lab scale and seems to work.  It is also within the typical range for filters according to the American Water Works Association (AWWA) guidelines.
V_FiLayer = 158.4 m/day
# Determine the geometry of the filter
# Note: The filter is rectangular for now, but we may consider cylindrical shapes later due to large filter bed sizes.  The filter is not constrained by any underdrains because of the use of manifolds
H_FiLayerMin := 20 cm  # Depth of each filter layer
# Calculate the clean-bed head loss during filtration
# The head loss across each layer of the filter must be large compared to losses in the plumbing that distributes water into the sand bed, in order for the water to be distributed uniformly to each layer.  At the beginning of a filtration cycle when the sand bed is clean, the head loss is the smallest.  This minimum head loss during filtration is estimated by the Carman-Kozeny equation.
k_Kozeny := 5  # Carman-Kozeny coefficient
h_lKozeny(L, D, V, ε, ν) := k_Kozeny*L*ν/g*(1 - ε)^2/ε^3*36/D^2*V
HL_FiCleanLayerMin := h_lKozeny(H_FiLayerMin, D_FiSand60, V_FiLayer, ε_FiSand, Nu_Water)
HL_FiCleanLayerMin = 5.56209 cm
# The head loss in the slotted pipes will be small compared with the clean bed head loss. Head loss in the filter media will thus equilibrate the flow.
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# Pressure recovery dominates major and minor losses, so it will set our manifold and trunk pipe sizes
Pi_FiManifoldQ := 0.85
# Ratio of long path flow to short path flow. We need to develop a better hydraulic model of this system. The piezometric head inside the inlet and outlet manifold systems follow trends that tend to keep the net piezometric head difference between the two pipe networks similar. Thus the expected flow variation is less than what we are modeling here.
# Ratio of head loss through the slotted pipes to the head loss through the clean bed; this is half the total head loss in the manifold, the other half will be in the trunk line. This constraint is critical and determines all of the pipe sizes related to the filtration cycle. This is likely still conservative.
Pi_FiManifoldHeadLoss := (1 - Pi_FiManifoldQ^2) = 0.2775
# Exit and entrance pipes will have additional head loss. We need to verify that this head loss is acceptable. The constraint is that we don't want excessive head loss through these pipes because that head loss will force us to use a deeper filter box or will result in lower water level elevation in the effluent.
H_FiLayerF(ND) := max(H_FiLayerMin, Ceil(OuterDiameterFittingPVC(ND), 1 cm))  # round up to the nearest cm to make construction easier
## Array of possible flow rates through trunk lines
Q_FilterMax :=
    for i ∈ 0 .. last(AvailND)
        H_FiLayer ← H_FiLayerF(AvailND[i])
        HL_FiCleanLayer ← h_lKozeny(H_FiLayer, D_FiSand60, V_FiLayer, ε_FiSand, Nu_Water)
        V_FiMaxPR ← sqrt(2*g*(HL_FiCleanLayer*Pi_FiManifoldHeadLoss))
        Q_FilterMax[i] ← π*innerdiameter(AvailND[i], PS_Default)^2/4*V_FiMaxPR*N_FiLayer/2
    return Q_FilterMax
# This function returns the maximum flow rate through a filter for each of the available trunk pipe sizes based on the flow distribution constraint.
N_FiMax := min(ceil(Q_Plant/LookupCeil(6 in, AvailND, Q_FilterMax)), 4) = 2
# Constraint the number of filters to a reasonable value and increase the depth of the filter bed for large plants. This function needs to eventually be based on cost minimization and what is required for easy operation of the plants.
ND_FiTrunk := LookupCeil(Q_Plant/N_FiMax, Q_FilterMax, AvailND) = 6 in
H_FiLayer := H_FiLayerF(ND_FiTrunk) = 20 cm
HL_FiCleanLayer := h_lKozeny(H_FiLayer, D_FiSand60, V_FiLayer, ε_FiSand, Nu_Water) = 5.56209 cm
HL_FiManifoldMax := HL_FiCleanLayer*Pi_FiManifoldHeadLoss
V_FiMaxPR := sqrt(2*g*HL_FiManifoldMax) = 0.550207 m/s
ID_FiTrunk := innerdiameter(ND_FiTrunk, PS_Default) = 6.083 in
H_FiSand := N_FiLayer*H_FiLayer = 1.2 m  # The total depth of sand
Q_FiMax := π*innerdiameter(ND_FiTrunk, PS_Default)^2/4*V_FiMaxPR*N_FiLayer/2 = 30.9485 L/s
# Top View | Side View
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# Calculate the head loss across the bed during backwashing
# The head loss during backwash is the energy required to fluidize the sand in the filter.
HL_FiBwSS := H_FiSand*(Rho_FiSand - Rho_Water)*(1 - ε_FiSand)/Rho_Water
# The backwash head loss is almost exactly equal  to the sand bed depth. Note that this ignores losses in the plumbing.
HL_FiBwSS = 1.188 m
HL_FiTerminal := 2*H_FiLayer
# Does not include the clean bed head loss. We are limiting the head loss gradient to a value of 1. At this head loss an entire upflow layer of sand will become bouyant.
HL_FiDirty := HL_FiTerminal - HL_FiCleanLayer = 34.4379 cm
# Terminal head loss through the filter; set to be 30 cm more than the clean bed head loss
HL_FiTerminal = 0.4 m
HL_FiBwSF := 40 cm
# This is the extra head we are going to provide to ensure that we can initiate backwash. This may be excessive and it will likely be possible to reduce this in designs after Tamara.
HL_FiBwInitiation := HL_FiBwSF + HL_FiBwSS = 1.588 m
B_FiManifoldBranch := 10 cm
# This is the spacing (center to center) of the manifold branches on the trunk line. Presumably this number scales with the layer thickness. Deeper filter layers could still work well if the spacing increased. Our lab filter is 10 cm in diameter and has one manifold branch per layer and thus the branch spacing was equivalent to 10 cm.
N_Fi := min(ceil(Q_Plant/Q_FiMax), N_FiMax) = 2
# The flow will be divided evenly between the N_Fi = 2 filters.
Q_Fi := Q_Plant/N_Fi = 16 L/s
A_Fi := Q_Fi/(N_FiLayer*V_FiLayer) = 1.45455 m^2  # This is the required area of each of the N_Fi = 2 filters.
ND_FiManBranch := 1 in
# We are going to take this pipe size for the slotted pipes as a given. Larger pipes may block too much flow and they are harder to install.
Q_FiManBranchMax := V_FiMaxPR*π*innerdiameter(ND_FiManBranch, PS_FiBranch)^2/4 = 0.306785 L/s
# branches are coming out of both sides of the manifold
N_FiManBranch := ceil(2*Q_Fi/(N_FiLayer*Q_FiManBranchMax)) = 18
Q_FiManBranch := 2*Q_Fi/(N_FiLayer*N_FiManBranch) = 0.296296 L/s
# this is the length of the branches on ONE side of the filter
L_FiManBranchActive := Q_FiManBranch/(2*V_FiLayer*B_FiManifoldBranch) = 0.808081 m
A_Fi/(L_FiManBranchActive*2) = 0.9 m
Q_FiLayer := Q_Fi/N_FiLayer = 2.66667 L/s  # This is the flow rate through each filter layer
# Manifold Design justification
# Filtration mode constraints
# The inlet manifolds need to have a small piezometric head variation relative to the head loss through a clean sand bed. Given that both the trunk lines and the branches are short manifolds (fL/d < 1), the piezometric head variability is dominated by pressure recovery which is given by V^2/(2*g)*.  where the velocity is the initial velocity in the manifold. Thus the velocity in the trunk and branch lines is limited by this constraint. If we want to relax this constraint we could add head loss through the slots. But we need to be careful to not cause a flow imbalance between the inlets that carry flow for two layers and the inlets that carry flow for only one layer. Perhaps top inlet and bottom inlet should have only one line of slots per pipe instead of two lines. We are currently assuming that the backwash branches will have 1/2 the slot area of the branches in the other layers.
#
# Slot head loss issues
# If we use the slots to generate head loss in an effort to improve flow distribution, we need to account for sand blocking (1-ε) of the slots during filtration. The slots are not blocked during backwash (except perhaps during backwash initiation).
#
# Backwash mode constraints
# The  constraint on the design of the backwash manifold branches is that the flow rate from each slot must be close to the average (perhaps within 20%). We cannot rely on head loss through the filter media to help create uniform flow from the manifold during backwash because the filter bed will be fluidized. Thus we must design the backwash manifold to have uniform flow distribution without any external assistance. We can improve uniformity of flow distribution by decreasing head loss and pressure recovery in the manifold branches and in the trunk line and/or by increasing the head loss through the slots. The backwash system will also be used during filtration and the flow rate in the backwash manifold system will vary by a factor of 6 between those two states. Thus head loss through the slots will vary by a factor of 36 between the two states. We could use a relatively high slot head loss to get uniform flow distribution. The slot head loss must be small enough during filtration mode to not cause a flow inbalance between filter layers. That suggests that the slot head loss must be less than 10% of the clean bed head loss during filtration and thus less than 36 times that amount during backwash.
#
# Flow distribution in a short manifold is quite uniform for the case when the total port area is equal to or less than the manifold area. We have two manifold systems operating in series with trunk line distributing flow to branches and branches distributing flow to slots. Head loss through the slots effectively helps distribute flow between branches as well as between slots. Thus the constraints on both trunk and branch sizes are that they have pressure recovery terms that are small compared with the head loss through the slots.
# Algorithm for trunk, branch, slot design
# Head loss through the slots in the backwash manifold are directly related to the head loss throught the slots during filtration. The flow area during filtration will be reduced due to sand blocking. This results in a factor of ε_FiSand
# Calculate slot area for backwash assuming this head loss.
# Note that the slot area for backwash analysis should not be adjusted for sand porosity.
# Calculate size of branch lines using the rule that their area must exceed the port area.
# Given the area of the branch lines, recalculate the slot area by setting it equal to the branch area.
# Recalculate the actual head loss through the slots given this new slot area.
#
# Calculate the size of the trunk lines using the rule that their area must exceed the port area. Thus branches must have more area than the slots in a branch. Trunk must have more area than the branches.
HL_FiManifoldMax = 1.54348 cm
V_FiMaxPR = 0.550207 m/s
HL_FiBwSlotEst := HL_FiManifoldMax*(Q_Fi*ε_FiSand/Q_FiLayer)^2 = 8.89044 cm
# This is the maximum head loss we can have in the backwash slots. The equation scales the filtration head loss target tot he backwash target taking into account the different flow rates and the assumption that the slots are blocked by sand during filtration (and not during backwash).
A_FiBwLayerSlotsEst := A_orifice(HL_FiBwSlotEst, Pi_VenaContractaOrifice, Q_Fi) = 192.328 cm^2
# Applying the rule that the branch area must be greater than or equal to the slot area
ND_FiBwManBranch := NominalDiameter(CeilNearest(D_circle(A_FiBwLayerSlotsEst/N_FiManBranch), AvailPipeSizes(PS_FiBranch)[:, 0]), PS_FiBranch) = 1.5 in
# Now that we have the backwash branch size we can determine the maximum slot size (to reduce head loss).
A_FiBwManBranches := π/4*innerD(ND_FiBwManBranch, PS_FiBranch)^2*N_FiManBranch
A_FiBwLayerSlots := A_FiBwManBranches = 236.419 cm^2  # Using same size slots as total branch area to get reasonable flow distribution.
HL_FiBwSlot := h_orifice(D_circle(A_FiBwLayerSlots), Pi_VenaContractaOrifice, Q_Fi) = 5.88363 cm
ND_FiBwTrunk := NominalDiameter(CeilNearest(D_circle(A_FiBwManBranches), AvailPipeSizes(PS_Default)[:, 0]), PS_Default) = 8 in
W_FiActive := 2*L_FiManBranchActive = 1.61616 m
# This is only the active filtration width.  This extends from the edge of the filtration trunk lines to the lip that holds the manifold branches in place.
ND_FiBranchHolder := 2 in
W_Fi := W_FiActive + OuterDiameterFittingPVC(ND_FiBwTrunk) + 2*OuterDiameterFittingPVC(ND_FiBranchHolder) = 1.98922 m
ND_DistPipe := D_pipeschedule(Q_Plant, PS_Default, 1 m, 100 m, Nu_Water, E_Pvc, 2) = 8 in  # max 5cm headloss over weir into entrance tank
W_FiEntrance := max(3*S_Fitting + ConRadius(ND_FiBwTrunk) + 3*ConRadius(ND_FiTrunk) + 2*(SocketDepth(ND_FiTrunk) + ElbowRadius(ND_FiTrunk)), W_HumanMin, W_rectweir(Q_Fi, 5 cm)) = 1.11569 m
W_FiOverflow := W_Fi + T_FiWall - W_FiEntrance - 2*T_PlantWall = 0.82353 m
# The bottom manifold needs to be designed to handle full filter flow for backwash operation
Q_FiBwManBranch := Q_Fi/N_FiManBranch = 0.888889 L/s
L_Fi := N_FiManBranch/2*B_FiManifoldBranch + 2*ConRadius(ND_FiKeyPipe) + CapThickness(ND_FiBwTrunk) = 0.965881 m
L_FiBwTrunk := N_FiManBranch/2*B_FiManifoldBranch + min(2*ConRadius(ND_FiKeyPipe), SocketDepth(ND_FiBwTrunk))
L_FiTrunk := N_FiManBranch/2*B_FiManifoldBranch + min(2*ConRadius(ND_FiKeyPipe), SocketDepth(ND_FiTrunk)) + CapThickness(ND_FiBwTrunk) - CapThickness(ND_FiTrunk)
h_e(Q, D, K)
HL_FiBwInletManifold := 1/3*h_f(Q_Fi, innerD(ND_FiBwTrunk, PS_Default), L_Fi, Nu_Water, E_Pvc) + h_e(Q_Fi/N_FiManBranch, innerD(ND_FiBwManBranch, PS_FiBranch), K_PipeEnt) + (1/3*h_f(Q_Fi/N_FiManBranch, innerD(ND_FiBwManBranch, PS_FiBranch), W_FiActive, Nu_Water, E_Pvc) + HL_FiBwSlot) = 8.03226 cm
# Inner manifolds have double the slot area of the upper and lower manifolds
A_FiLayerSlots := 2*A_FiBwLayerSlots = 472.837 cm^2
# A conservative estimate of the head loss through the slots given sand blockage
HL_FiSlot := (2*Q_FiLayer/(Pi_VenaContractaOrifice*A_FiLayerSlots*ε_FiSand))^2*1/(2*g) = 1.02146 cm
# This head loss should end up being smaller than HL_FiManifoldTarget.
# Pressure recovery dominates the design for filtration. The constraint on the manifolds is that the pressure recovery term must be small relative to the head loss through the filter bed.
ND_FiTrunk = 6 in
HL_FiTrunk := 1/3*h_l(2*Q_FiLayer, innerD(ND_FiTrunk, PS_Default), L_Fi, K_PipeExit, Nu_Water, E_Pvc) = 0.158125 cm
# This is the head loss in the manifold part of the trunk line. This does not include head loss in the rest of the inlet pipe.
ND_FiManBranch = 1 in  # This was designed previously.
ShortTeeLength(ND_FiManBranch) = 0.0381 m
L_FiManBranchExt := 2 cm  # How far the branch extends into the trunk line
# Active width plus the T.ConcreteMin for the lip on the far side minus the Tee length from the wall plus a distance the branch will extend into the trunk line
L_FiManBranch := L_FiManBranchActive + 2*L_FiManBranchExt + ConRadius(ND_FiBwTrunk) - ConRadius(ND_FiTrunk) = 0.874275 m
L_FiBwManBranch := L_FiManBranchActive + 2*L_FiManBranchExt = 0.848081 m
# Same as above but the backwash branches will be shorter by the difference between the radius' of the trunks and backwash trunk
HL_FiInletManifold := 1/3*h_f(2*Q_FiLayer, innerD(ND_FiTrunk, PS_Default), L_Fi, Nu_Water, E_Pvc) + h_e(2*Q_FiLayer/N_FiManBranch, innerD(ND_FiManBranch, PS_FiBranch), K_PipeEnt) + 1/3*h_f(2*Q_FiLayer/N_FiManBranch, innerD(ND_FiManBranch, PS_FiBranch), W_FiActive, Nu_Water, E_Pvc) + HL_FiSlot = 2.80322 cm
# Slotted Pipe Specs
## General specifications
W_Slots := 0.008 in = 0.2032 mm  # A slot thickness of 0.008 in or 0.2 mm is selected so that sand will not enter the slotted pipes.
# These are the possible spacings for the slots that our supplier can fabricate
B_SlotsAvailable := [1/8*in; 3/16*in; 1/4*in] = [3.175; 4.7625; 6.35] mm
## Backwash manifold branches
ND_FiBwManBranch = 1.5 in
N_FiManBranch = 18
A_FiBwLayerSlots = 236.419 cm^2
# The slots should be configured to provide this total amount of slot area for the
# bottom manifold handling the backwash flow. We will define this as the inner diameter area of the slots
A_FiBwBranchSlots := A_FiBwLayerSlots/N_FiManBranch = 13.1344 cm^2  # This is the amount of slot area that must be available for each length of pipe.
L_FiBwManSlotTotal := A_FiBwBranchSlots/W_Slots = 6.46376 m  # The slots on each pipe must have this total length to provide the required area.
# We select  B_FiBwManSlot := 3/16*in = 4.7625 mm  for the closest slot spacing, and N_FiBwSlotRows := 2  for best structural integrity of these pipes
N_FiBwManSlots := floor(N_FiBwSlotRows*W_FiActive/B_FiBwManSlot) = 678
# Over the active area of the filter, there will be N_FiBwManSlots = 678slots whose area will effectively
# contribute to the total required slot area
L_FiBwManSlot := L_FiBwManSlotTotal/N_FiBwManSlots = 0.375337 in
C_FiBwManInner := π*innerdiameter(ND_FiBwManBranch, PS_FiBranch) = 5.05796 in  # Check
# SPECIFICATIONS:  we need  N_FiManBranch = 18 pipes of diameter  ND_FiBwManBranch = 1.5 in  with  W_Slots = 0.2032 mm  wide,  L_FiBwManSlot = 9.53357 mm  long slots spaced at  B_FiBwManSlot = 0.1875 in
USD := ¤
P_FiBwManBranches := N_FiManBranch*1*m*(12*USD/(5 ft)) = 141.732 USD
## Filtration manifold branches
ND_FiManBranch = 1 in
N_FiManBranch = 18
A_FiLayerSlots = 472.837 cm^2
A_FiBranchSlots := A_FiLayerSlots/N_FiManBranch = 26.2687 cm^2
L_FiManSlotTotal := A_FiBranchSlots/W_Slots = 12.9275 m
# We select  B_FiManSlot := 0.125 in = 3.175 mm  for the closest slot spacing, and N_FiSlotRows := 2  for best structural integrity of these pipes
N_FiManSlots := floor(N_FiSlotRows*W_FiActive/B_FiManSlot) = 1018
# Over the active area of the filter, there will be N_FiManSlots = 1018slots whose area will effectively
# contribute to the total required slot area
L_FiManSlot := L_FiManSlotTotal/N_FiManSlots = 0.499958 in
C_FiManInner := π*innerdiameter(ND_FiManBranch, PS_FiBranch) = 3.29553 in  # Check
# SPECIFICATIONS:  we need  N_FiManBranch*(N_FiLayer - 1) = 90 pipes of diameter  ND_FiManBranch = 1 in  with  W_Slots = 0.2032 mm  wide,  L_FiManSlot = 12.6989 mm  long slots spaced at  B_FiManSlot = 0.125 in
P_FiManBranches := N_FiManBranch*(N_FiLayer - 1)*1*m*(9*USD/(5 ft)) = 531.496 USD
HL_FiInletPlumbing := h_l(2*Q_FiLayer, innerD(ND_FiTrunk, PS_Default), 2 m, K_El90 + K_PipeEnt, Nu_Water, E_Pvc) + HL_FiInletManifold = 3.50882 cm
HL_FiBwInletPlumbing := h_l(Q_Fi, innerD(ND_FiBwTrunk, PS_Default), 2 m, K_El90 + K_PipeEnt, Nu_Water, E_Pvc) + HL_FiBwInletManifold = 10.1071 cm
HL_FiOutletPlumbing := HL_FiInletPlumbing = 3.50882 cm
# Active filter area plus the diameter of the coupling in the wall plus  5 cm on the opposite side of the filter for the ledge that holds the man branches in place
# Ratio of active width to actual width and the bulk backwash velocity
V_FiBw*W_FiActive/(W_Fi - 5 cm) = 9.16747 mm/s
W_FiActive/W_Fi = 0.812458
# Calculate the Z of the backwash channel weir
# Calculate the head loss through the siphon during backwash
# AKA time to drain the filter box of the water above the fluidized bed
Ti_FiBwInitiationBod := 3 min
# Need a flow rate in order to determine HL through the siphon tube
#
# Siphon has to handle the entire flow into the filter plus drain the terminal head in Ti.FiBwInitiation.  This is aapproximately a "hole in a bucket problem" so the average flow rate is half the max flow (hence the factor of 2).  The HL sum corresponds to the height of water that needs to be drained; this ignores HL in the siphon because we don't know it yet, but it should be small...
Q_FiSiphonDesign := Q_Fi + 2*A_Fi*(HL_FiBwInitiation + HL_FiBwInletPlumbing)/Ti_FiBwInitiationBod = 43.2981 L/s
# Minor losses for flow through the siphon; they will be much greater than major losses, making major losses negligible.
#
# 1 is from losses through the branched path of a Tee
K_FiSiphon := 5*K_El90 + K_PipeExit + K_PipeEnt + 1 = 7
h_eFiSiphonGuess := 20 cm  # Maximum acceptable head loss through the siphon at SS; used to calculate a Diameter
D_FiSiphonGuess := nthroot(K_FiSiphon*8/(g*π^2)*Q_FiSiphonDesign^2/(HL_FiBwInitiation + HL_FiBwInletPlumbing), 4) = 6.2673 in
# Minor Loss Equation rearranged to solve for D, not necessarily an available pipe size
D_FiSiphonSSGuess := nthroot(K_FiSiphon*8/(g*π^2)*Q_Fi^2/h_eFiSiphonGuess, 4) = 6.49472 in
ND_FiSiphon := NominalPipeSize(max(D_FiSiphonGuess, D_FiSiphonSSGuess)) = 8 in  # This selects the more limiting case; appears it is SS
HL_FiSiphonSS := h_e(Q_Fi, innerD(ND_FiSiphon, PS_Default), K_FiSiphon) = 9.03967 cm  # Head loss through the siphon
Rho_FiFluidized := (Rho_Water*H_FiSand*ε_FiSand + Rho_Water*H_FiSand*ε_FiSand*(Pi_FiFluidized - 1) + Rho_FiSand*H_FiSand*(1 - ε_FiSand))/(H_FiSand*Pi_FiFluidized) = 1623.08 kg/m^3
B_FiSiphonManOrificesEst := 10 cm
N_FiSiphonManOrifices := 2*floor((L_Fi - 2*ConRadius(ND_FiSiphon))/(2*B_FiSiphonManOrificesEst)) = 6
# This keeps the area of the orifices the same as the siphon area.
D_FiSiphonManOrifices := CeilNearest(innerdiameter(ND_FiSiphon, PS_Default)/sqrt(N_FiSiphonManOrifices), D_Drill) = 0.0821369 m
B_FiSiphonManOrifices := (L_Fi - 2*ConRadius(ND_FiSiphon) - N_FiSiphonManOrifices*D_FiSiphonManOrifices)/N_FiSiphonManOrifices + D_FiSiphonManOrifices
# Calculate the head loss over the weirs
# We are making the exit and backwash weirs as long as the filter is wide because it is a convenient dimension for construction.
# max 5cm headloss over weir
L_FiEntranceWeir := W_FiEntrance = 1.11569 m
# This is used for entrance and exit weirs (not necessarily backwash)
L_FiBwWeir := L_FiEntranceWeir*(1 + (N_Fi > 1)) + T_FiWall
HL_FiBwWeirEst := Headloss_weir(Q_Fi*(1 + (N_Fi > 1)), L_FiBwWeir)  # est because we don't know the flow through the siphon yet
HL_FiEntranceWeir := Headloss_weir(Q_Fi, L_FiEntranceWeir) = 3.90272 cm  # This is true of the entrance and exit weirs
L_FiOverflowWeir := 2*ConRadius(ND_FiBwTrunk) + 2*ConRadius(ND_FiTrunk) + 3*S_Fitting + (2*ConRadius(ND_DistPipe) + S_Fitting)*(N_Fi > 2)
HL_FiOverflowWeir := Headloss_weir(Q_Fi, L_FiOverflowWeir) = 0.0610189 m
L_FiDistWeir := max(4*ConRadius(ND_FiTrunk) + 3*S_Fitting, S_Fitting + max(CouplingLength(ND_DistPipe) - T_PlantWall, 0) + SocketDepth(ND_DistPipe) + ElbowRadius(ND_DistPipe) + ConRadius(ND_DistPipe))
HL_FiDistWeir := Headloss_weir(Q_Fi, L_FiDistWeir)
## Design a pipe to convey flow from the sed tank to the entrance box
HL_FiEntranceWeir = 3.90272 cm  # Head loss over the weir into the entrance box
# multiplied just in case
L_FiInletChannelEst := W_Fi*N_Fi + (W_FiOverflow + 2*T_PlantWall)*ceil(N_Fi/2) + (N_Fi == 4)*T_PlantWall + (N_Fi == 4)*max(0, 1.5*T_FiWall + W_Fi - (2*T_PlantWall + W_Fi + 0.5*W_FiOverflow))
W_DCEst := ValveLength(ND_SedSludgePipe) + ElbowRadius(ND_SedSludgePipe) + MaleAdapterLength(ND_SedSludgePipe) + ConRadius(ND_SedSludgePipe) + ValveLength(ND_SedHopperDrain) + ElbowRadius(ND_SedHopperDrain) + ConRadius(ND_SedHopperDrain) + MaleAdapterLength(ND_SedHopperDrain)
L_FiEntrancePipeEst := W_DCEst + max(0, (W_FlocChannel + T_PlantWall)*N_FlocChannels - L_FiInletChannelEst) + T_Floor + S_Fitting
K_FiEntrancePipe := K_El90 + K_PipeEnt + K_PipeExit = 2.4
# Set a target of  HL_FiEntrancePipeTarget := H_SedWeirExit/2  to keep the level of water in the pipe below the sed weir.  If the pipe ends up being completely submerged, it will
# affect the level of water in the sed tanks.
ND_FiEntrancePipe := D_pipeschedule(Q_Plant, PS_Default, HL_FiEntrancePipeTarget, L_FiEntrancePipeEst, Nu_Water, E_Pvc, K_FiEntrancePipe)
ND_FiEntrancePipe = 8 in
HL_FiEntrancePipe := h_l(Q_Plant, innerdiameter(ND_FiEntrancePipe, PS_Default), L_FiEntrancePipeEst, K_FiEntrancePipe, Nu_Water, E_Pvc) = 12.8282 cm
# Inlet Channel to the Filter
ZW_FiInletChannel := Z_SedWeirExit - HL_ChannelMax - HL_FiEntrancePipe = 1.7432 m
# This is the height of the entrance weir at the inlet of the entrance box and represents the maximum water height in the entrance box
Z_FiEntranceWeir := ZW_FiInletChannel - HL_FiEntranceWeir
ZW_FiEntranceMax := Z_FiEntranceWeir - H_Freefall
Z_FiBwWeir := ZW_FiEntranceMax - (HL_FiBwInletPlumbing + HL_FiBwInitiation + HL_FiSiphonSS + HL_FiEntranceWeir) = -0.214325 m
ZW_FiEntranceMax - Z_FiBwWeir = 1.81849 m  # This is the head loss available to drive water through the filter during backwash mode.
# Now calulate the max flow rate through the siphon and check the weir design to make sure the backwash box doesn't overflow at the beginning of backwash.
Q_FiSiphonMax := Q_pipetotal(innerD(ND_FiSiphon, PS_Default), Z_FiEntranceWeir - (Z_FiBwWeir - HL_FiBwWeirEst), 4 m, Nu_Water, E_Pvc, K_FiSiphon) = 72.768 L/s
# The length of the siphon is estimated here because we don't yet know all the required elevations. Major losses aren't that significant and so the length estimate doesn't cause significant errors.
HL_FiBwWeir := Headloss_weir(Q_FiSiphonMax*(1 + N_Fi > 1)*N_Fi, L_FiBwWeir) = 9.98085 cm
Ti_FiBwInitiation := 2*A_Fi*(HL_FiBwInitiation + HL_FiBwInletPlumbing)/(Q_FiSiphonMax - Q_Fi) = 86.5569 s
# This time estimate is approximate. The flow is varying with time. The factor of 2 is an approximate integration constant. (average flow is half the max). But this doesn't account correctly for the influence of the constant filtration flow.
# Calculate the elevation of bottom of the filter box and its height
H_FiFluidizedBed := Pi_FiFluidized*H_FiSand
# This SF is so the end of the pipe is 10 cm under water
Z_FiSiphonInlet := Z_FiBwWeir - H_FiSiphonNoSuckAir = -0.314325 m
# Minimum length of the siphon that needs to be submerged in the filter box is set to the SF
Z_FiBottom := Z_FiSiphonInlet - H_FiFluidizedBed - H_FiFluidizedBedToSiphon - ConRadius(ND_FiBwManBranch) = -2.1029 m
H_Fi := Z_FiEntranceWeir + H_PlantFreeboard - Z_FiBottom = 3.90707 m
Z_FiTop := Z_FiBottom + H_Fi = 1.80417 m
H_FiCheck := H_FiFluidizedBed + H_FiFluidizedBedToSiphon + HL_FiBwInitiation + H_PlantFreeboard + H_FiSiphonNoSuckAir + HL_FiBwInletPlumbing + HL_FiSiphonSS + HL_FiEntranceWeir + ConRadius(ND_FiBwManBranch) = 3.80707 m
# Just done to verify that the H.Fi calculation is correct.  See the wiki for a picture.
# Calculate the dimesions of the entrance box
Z_FiExitWeir := ZW_FiEntranceMax - (HL_FiTerminal + HL_FiInletPlumbing + HL_FiOutletPlumbing) - HL_FiDistWeir = 1.07476 m
# This sets the bottom of the entrance and exit tanks low enough to work for both the entrance tank requirements and the exit tank requirements. SF for not sucking air into the backwash line and for providing a minimum depth of water in the outlet to back up behind the weir.
H_FiExitMinDepth := 10 cm
Z_FiEntranceBottomFitPipes := Z_SedChannelBottom - max(CouplingLength(ND_FiEntrancePipe), T_PlantWall) - ElbowRadius(ND_FiEntrancePipe) - ConRadius(ND_FiEntrancePipe) - S_Fitting - SocketDepth(ND_FiEntrancePipe)
Z_FiEntranceBottom := min(ZW_FiEntranceMax - HL_FiBwSF - HL_FiDirty - H_FiBwNoSuckAir, Z_FiExitWeir - H_FiExitMinDepth, Z_FiEntranceBottomFitPipes) = 0.659791 m
H_FiEntrance := Z_FiEntranceWeir - Z_FiEntranceBottom + H_PlantFreeboard + HL_FiEntranceWeir = 1.18341 m
Z_FiEntranceBottom + H_FiEntrance = 1.8432 m
HW_FiEntrance := ZW_FiEntranceMax - Z_FiEntranceBottom = 0.944379 m
# The entrance channel wall opposite and perpendicular the weir is the same height as the filter box
# W.FiEntrance is calculated below (under the overflow box) because we need those dimensions first to ensure any "extra" space is allotted in the entrance box rather than the overflow box
# space between right side of entrance box and baffle:
S_FiEntranceBaffle := ((Q_Fi/T_ChannelWall)^2/g)^(1/3)
S_FiBaffleToBlock := ((Q_Fi/T_ChannelWall)^2/g)^(1/3)
Z_FiAirRemovalBlockBottom := 0.15*S_FiEntranceBaffle + Z_FiEntranceBottom
Z_FiAirRemovalBlockTop :=
    (Z_FiBwWeir + N_FiLayer*H_FiLayer - HL_FiBwWeir) if Z_FiBwWeir + N_FiLayer*H_FiLayer - HL_FiBwWeir ≤ Z_FiEntranceWeir - HL_FiEntranceWeir
    (Z_FiEntranceWeir - HL_FiEntranceWeir) otherwise
W_FiAirRemovalBlock := T_SedWeir  # make this a generic weir thickness at some point?
L_FiEntrance := L_FiOverflowWeir + S_FiEntranceBaffle + S_FiBaffleToBlock + 2*T_SedWeir
# Calculate the dimensions of the overflow box
ND_FiEntranceOverflow := NominalPipeSize(D_PipeTotal(Q_Fi, 1 m, 1 m, Nu_Water, E_Pvc, K_PipeExit + K_PipeEnt)) = 4 in
L_FiOverflow := L_FiEntrance
H_FiOverflow := H_FiEntrance
Z_FiOverflowBottom := Z_FiEntranceBottom = 0.659791 m
Z_FiOverflowWeir := ZW_FiEntranceMax - HL_FiOverflowWeir = 1.54315 m
Z_FiEntranceWeir = 1.70417 m
Z_FiEntranceBottom + HW_FiEntrance = 1.60417 m
HW_FiEntrance = 0.944379 m
Z_FiEntranceBottom = 0.659791 m
Z_FiExitWeir + HL_FiTerminal + HL_FiInletPlumbing + HL_FiOutletPlumbing - Z_FiEntranceBottom = 0.885141 m
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# This will be the pipe layout in the entrance and exit boxes to allow for 2 90 degree elbows in  Pipes 2 and 3 coming from the entrance box (on the right)
# How much does the filter bed over fluidize when the entrance box level lowers after backwash initiation?
H_FiFluidizedBedVariation := (HL_FiBwInitiation - HL_FiBwSS)*(W_FiEntrance^2 - 3*OuterDiameterFittingPVC(ND_FiTrunk)^2/4*π)/A_Fi = 0.32034 m
HL_FiBwInitiation - HL_FiBwSS = 0.4 m
HL_FiBwInletPlumbing = 0.101071 m
Q_Ratio := sqrt((HL_FiBwInitiation - HL_FiBwSS)/HL_FiBwInletPlumbing) = 1.98938
# We will leave the bottom of these tanks at a low elevation (that we have calculated) and add pipe stubs as needed. We need to experiment with free fall in the backwash pipe and with the inevitable entrainment of air to see if that is a problem. There will be a tradeoff between air entrainment and fluidized bed expansion. We may want to include an air vent in the backwash pipe (T with vertical leg returning to above original water height to vent air).
# Calculate the dimensions of the exit box
# Calculate ND for the waste pipe (check this)
ND_FiExitWaste := NominalPipeSize(D_PipeTotal(Q_Fi, 2 m, 1 m, Nu_Water, E_Pvc, K_PipeExit + K_PipeEnt + 2*K_El90)) = 4 in
# This means the water level in the entrance box will actually be 10 cm higher than we assumed in previous calculations to ensure BW initiation (aka we have a 10cm SF for BW initiation)
# The goal is to have water start overflowing from the entrance tank when the filter reaches terminal head loss
Z_SedWeirExit - Z_FiExitWeir = 0.846723 m  # This is the energy used to filter water
Z_FiEntranceWeir - Z_FiExitWeir = 0.629414 m  # Difference in heights for the Exit and Entrance weirs
# The first two terms determine the height of the water at BW SS.  The additonal terms calculates the additional height to prevent the pressure in the lowest outlet pipe from causing backwash water to flow into the exit box.
Z_FiExitPipeStubMin := Z_FiBwWeir + HL_FiSiphonSS + (HL_FiBwSS*(H_FiFluidizedBed - H_FiLayer)/H_FiFluidizedBed) = 0.911764 m
Z_FiExitBottom := Z_FiEntranceBottom = 0.659791 m
# The bottom of the tank is currently above the minimum stub height in the exit box and thus pipe stubs are not needed in the exit box to prevent flow of water during backwash.
ZW_FiExit := Z_FiExitWeir + HL_FiDistWeir = 1.13399 m
H_FiExit := H_FiEntrance = 1.18341 m
HW_FiExit := ZW_FiExit - Z_FiExitBottom
L_FiExit := L_FiDistWeir = 0.596619 m
W_FiExit := W_FiEntrance = 1.11569 m
W_Fi + OuterDiameterFittingPVC(ND_FiBwTrunk) - (W_FiExit + .5*OuterDiameterFittingPVC(ND_DistPipe)) = 0.991799 m
# This is a check to make sure the  entrance/exit boxes in different filters did not overlap
Z_FiInletChannelBottom := Z_FiExitBottom
HW_FiInletChannel := ZW_FiInletChannel - Z_FiInletChannelBottom
H_FiInletChannel := HW_FiInletChannel + H_PlantFreeboard
W_FiInletChannel := max(W_HorizChannelMin(Q_Plant, HW_FiInletChannel, L_FiEntrancePipeEst, Nu_Water, E_Pvc, 0), 2*ConRadius(ND_FiEntrancePipe) + 2*S_Fitting)
# Calculate the dimensions of the backwash box
# Minimum height of water in the filter box during filtration
ZW_FiStart := Z_FiExitWeir + HL_FiOutletPlumbing + HL_FiCleanLayer + HL_FiEntranceWeir = 1.20449 m
# This is the center line of the pipe through the wall.  This is a maximum based on zero flow and the goal of wanting to be able to initiate backwash at the beginning of filtration. This constraint could be relaxed if needed.
Z_FiSiphonCouplingMax := Z_FiExitWeir - outerdiameter(ND_FiSiphon)/2 = 0.965218 m
Z_FiSiphonCouplingMinSimplistic := ((Z_FiTop - H_PlantFreeboard) + Z_FiSiphonInlet)/2 + outerdiameter(ND_FiSiphon)/2 = 0.80446 m
# This is based on the lab constraint that the depth of water above the pipe cannot be longer than the pipe inside the filter
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H_FiSiphonMax := Z_FiTop - H_PlantFreeboard - Z_FiBwWeir = 1.91849 m  # Max water elevation difference between filter and backwash tank
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L_FiSiphonTop := L_Fi/2 + ShortTeeLength(ND_FiBwManBranch) + T_PlantWall = 0.690091 m
P_Atm := 1 atm
Z_FiSiphonCouplingMin := ZW_FiEntranceMax - HL_FiInletPlumbing - (H_FiSiphonMax - HL_FiSiphonSS)*P_Atm/(Rho_Water*g*(L_FiSiphonTop + H_FiSiphonMax) + 2*P_Atm) + outerdiameter(ND_FiSiphon)/2 = 0.867022 m
Z_FiSiphonCoupling := Z_FiSiphonCouplingMax = 0.965218 m
# This is based on the constraint that we want the siphon to function at half flow rate (and it would actually work at zero flow as well). The siphon is completely submerged if water is flowing across the exit weir.
Z_FiSiphonCouplingMax - Z_FiSiphonCouplingMin = 0.0981962 m
# Not much room to spare here! We need to always check this and somehow report an error if this is negative!!!!
H_FiBwWeir := max(Z_FiBwWeir, H_SedWeirExit/2) = 0.164165 m
# Z.FiBwWeir - 0 will bring the bottom of the backwash box to the top of the drain channel. If that number is negative, it will be at least as deep as half of the sed weir
# We decided we could simultaneous make the box shallow and the pipe the shortest it could be by raising the bottom of the filter box.  In the event we want to change that constraint, this is the amount of room we have to play with.  For every cm we lower this, we lowert he other end 1 cm plus another 1.5cm to ensure air doesn't leak out.  We can use this to calculate a min
H_FiBw := H_FiBwWeir + H_PlantFreeboard + HL_FiBwWeir = 0.363974 m
Q_FiSiphonMax = 72.768 L/s  # Just for reference
W_FiBw := max(W_ChannelMin, 2*(S_Fitting + 2*ConRadius(ND_FiSiphon)), W_HorizChannel(Q_FiSiphonMax*N_Fi*(1 + N_Fi > 1), H_FiBw, HL_FiBwWeir, L_FiBwWeir, Nu_Water, E_Concrete, 1))
Z_FiBwBottom := Z_FiBwWeir - H_FiBwWeir = -0.37849 m
# This is the addition of the two siphon pipes and the drain pipe for the backwash box
Z_FiBwTop := Z_FiBwBottom + H_FiBw = -0.0145165 m
# Calculate the Z of the top of the pipe stubs in the entrance and exit boxes
# 5 cm is for exposed pipe, 1 of the diameters is for the elbow radius
ZW_FiStart = 1.20449 m
# We are going to set the top one to some level (20cm) below the min water level (at the beginning of filtration) and then have some distance (5 cm) in between them.
Z_FiEntrancePipes :=
    for i ∈ 0 .. 3
        Z_FiEntrancePipes[0] ← ZW_FiStart - 20 cm if i == 0
        Z_FiEntrancePipes[i] ← Z_FiEntrancePipes[i - 1] - 5 cm otherwise
    return Z_FiEntrancePipes
    = [1.00449; 0.954492; 0.904492; 0.854492] m
# This may not be correct for the BW pipe which may need to be shorter, but Monore "really doesn't think so"
Z_FiExitPipes := [
    Z_FiExitWeir - H_FiExitMinDepth;
    Z_FiExitWeir - H_FiExitMinDepth;
    Z_FiExitWeir - H_FiExitMinDepth;
    Z_FiExitPipeStubMin
] = [0.974756; 0.974756; 0.974756; 0.911764] m
# Calculate the Siphon Valve Size
# The available head is equal to the difference between the bottom of the siphon pipe and the steady state water level in the filter.  This is a head available in terms of water.
HL_FiSiphonValveWater := (Z_FiSiphonCoupling - ND_FiSiphon/2) - (Z_FiBwWeir + HL_FiSiphonSS) = 0.987546 m
rho_Water := 998.2*kg/m^3
rho_Air := 1.204*kg/m^3
Vol_FiSiphonAir := (CouplingLength(ND_FiSiphon) + 4*outerdiameter(ND_FiSiphon) + 2*(Z_FiSiphonCoupling - Z_FiBwWeir))*π/4*innerdiameter(ND_FiSiphon, PS_Default)^2 = 109.521 L
# Goal is to fill siphon tube with air in 1 second. To account for the diminishing head as the siphon tube fills with air we will use 0.5 seconds. This rapid fill is desirable so that the operator can open and then immediately close the valve without having to wait. This is important because the operator won't be able to see the air filling up the siphon tube.
Ti_FiSiphonBreak := 10 s
# Monroe increased this to 1 s (from 0.5 s) because the video of starting backwash showed the operator moving the valve slowly. This indicatess that it wasn't necessary to have such a large valve at Tamara.
# changed to 10s 1/7/2012
Q_FiSiphonAir := Vol_FiSiphonAir/Ti_FiSiphonBreak = 10.9521 L/s
HL_FiSiphonValveAir := HL_FiSiphonValveWater*rho_Water/rho_Air = 818.745 m  # This is the head available in terms of air.
K_FiSiphonValve := 3
# Entrance and Exit loses and ball valve losses
L_FiSiphonBreak := Z_FiBottom + H_Fi - Z_FiSiphonCoupling = 0.838952 m
# Estimated length of the pipe that will be connected to the air valve. Air valve will be at the very top of the filter.
ND_FiSiphonAirValve := NominalPipeSize(D_PipeTotal(Q_FiSiphonAir, HL_FiSiphonValveAir, L_FiSiphonBreak, Nu_Air, E_Pvc, K_FiSiphonValve)) = 0.75 in
# Piping and Fittings
# The last elbow for the backwash trunk line is replaced with a T.  The oppostie direction from the filter is a valve that goes to the waste channel in the event we want to dewater the filter without de-sanding it.
#
# The de-sanding pipe will be sized based on the volume of the fluidized bed being drained in under 5 minutes.  Predict a 3 in pipe
# There will be a tradeoff between air entrainment and fluidized bed expansion. We may want to include an air vent in the backwash pipe (T with vertical leg returning to above original water height to vent air).  (this should not be needed in the design as of late June 2011 because we are keeping the backwash inlet submerged at all times.)
# Sand removal pipe.
H_FiSandOutlet := 1 m  # to be high enough to dump into a 55 gal drum
# This can't be set any higher because the available head will be insufficient to pump sand unless we figure out a way to maintain a higher water level in the filter during the sand dump. See the small head loss available at the finish of pumping the sand below.
Z_FiSandOutlet := Z_FiBottom + H_FiSandOutlet = -1.1029 m
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Z_FiBwWeir = -0.214325 m  # This is higher than the sed tank drain channel. Thus the backwash water can easily discharge into the drain channel
Z_FiBottom = -2.1029 m
HL_FiSandOutlet := Z_FiBwWeir - Z_FiSandOutlet = 0.888575 m  # This isn't quite right because of the different densities.
# Calculating head loss and density for this problem is a bit complicated. The sand bed has a density of
Rho_FiFluidized = 1623.08 kg/m^3
# This ends up changing Nu.Water, but that doesn't change the results because we are in the very turbulent domain of the Moody diagram. The available head has to take into account the different densities of the fluidized bed and the water above the bed. As the fluidized bed is drained the available head will decrease. Would it be possible to drain the sand out of the bed at the very beginning of the backwash cycle while the water depth above the bed is gradually decreasing? This extra bed depth would provide more head to push the sand through the sand outlet.
# At the beginning of sand pumping the filter box has fluidized sand (and thus a high fluid density) and thus the pressure at the entrance to the sand dump is high. At the end of the sand dump the filter is filled with water and thus the pressure at the entrance to the sand dump is much lower and yet the sand dump pipe is still filled with the high density fluidized sand.
HL_FiSandOutletStart := ((Z_FiBwWeir - Z_FiBottom - H_FiSand*Pi_FiFluidized)*Rho_Water + H_FiSand*Pi_FiFluidized*Rho_FiFluidized + (-H_FiSandOutlet*Rho_FiFluidized))/Rho_FiFluidized = 0.76244 m
HL_FiSandOutletFinish := ((Z_FiBwWeir - Z_FiBottom)*Rho_Water + (-H_FiSandOutlet*Rho_FiFluidized))/Rho_FiFluidized = 0.163577 m
V_FiSand := W_Fi*L_Fi*H_FiSand*Pi_FiFluidized = 2997.31 L  # Total volume of the fluidized bed
# Use the largest pipe that will fit between the branch lines (but not between the backwash branch lines)
ND_FiSandOutlet := LookupFloor(B_FiManifoldBranch - outerdiameter(ND_FiManBranch), AvailOD, AvailND) = 0.0508 m
Q_FiSandOutletStart := Q_pipetotal(innerdiameter(ND_FiSandOutlet, PS_Default), HL_FiSandOutletStart, H_FiSandOutlet, Nu_Water*Rho_Water/Rho_FiFluidized, E_Pvc, K_PipeExit + K_PipeEnt + 2*K_El90) = 4.79316 L/s
Q_FiSandOutletFinish := Q_pipetotal(innerdiameter(ND_FiSandOutlet, PS_Default), HL_FiSandOutletFinish, H_FiSandOutlet, Nu_Water*Rho_Water/Rho_FiFluidized, E_Pvc, K_PipeExit + K_PipeEnt + 2*K_El90) = 2.21697 L/s
Q_FiSandOutlet := (Q_FiSandOutletStart + Q_FiSandOutletFinish)/2  # This isn't quite right, but it is close.
Ti_FiSand := V_FiSand/Q_FiSandOutlet = 14.2523 min  # This is the time required to empty the filter of the sand.
Ti_FiSandDrum := 220*L/Q_FiSandOutlet = 62.7663 s
Q_FiSandOutletFinish/(innerdiameter(ND_FiSandOutlet, PS_Default)^2/4*π) = 0.92658 m/s  # The velocity in the pipe is far greater than the backwash velocity
# Estimate of the flow rate that would allow sand to settle within the vertical pipe. This flow rate is really low and so the valve will need to be almost closed before the sand stops flowing.
Q_Settle := 5*mm/s*(innerdiameter(ND_FiSandOutlet, PS_Default)^2/4*π) = 0.0119632 L/s
