# [reference: BasicInputs.xmcd]
# [reference: ExpertInputs.xmcd]
# [reference: MathFunctions.xmcd]
# [reference: PipeDatabase.xmcd]
# [reference: FluidsFunctions.xmcd]
# [reference: SedimentationTank.xmcd]
# [reference: Flocculator.xmcd]
# [reference: LFOM.xmcd]
# [reference: LinearCdc.xmcd]
# [reference: ChemStorageTanks.xmcd]
# [reference: EntranceTank.xmcd]
ND_DistPipe := D_pipeschedule(Q_Plant, PS_Default, 1 m, 100 m, Nu_Water, E_Pvc, K_PipeEnt + K_PipeExit + 2*K_El90) = 8 in
H_FiForwardNoSuckAir := 10 cm
# Stacked Rapid Sand Filter
## Constraints and Comments (Not necessarily updated)
# Max head loss through inlet piping during filtration
# Max head loss through inlet piping during backwash
# Max head loss through outlet piping during filtration
# Max head loss through outlet piping during backwash (siphon)
# Max ratio of head loss in manifold to head loss through filter layer during filtration
# Max ratio of head loss in manifold to head loss through filter layer during filtration
# The head loss across each layer of the filter must be large compared to losses in the plumbing that distributes water into the sand bed, in order for the water to be distributed uniformly to each layer.  At the beginning of a filtration cycle when the sand bed is clean, the head loss is the smallest.  This minimum head loss during filtration is estimated by the Carman-Kozeny equation.
# Filtration mode constraints
# The inlet manifolds need to have a small piezometric head variation relative to the head loss through a clean sand bed. Given that both the trunk lines and the branches are short manifolds (fL/d < 1), the piezometric head variability is dominated by pressure recovery which is given by V^2/(2*g)*.  where the velocity is the initial velocity in the manifold. Thus the velocity in the trunk and branch lines is limited by this constraint. If we want to relax this constraint we could add head loss through the slots. But we need to be careful to not cause a flow imbalance between the inlets that carry flow for two layers and the inlets that carry flow for only one layer. Perhaps top inlet and bottom inlet should have only one line of slots per pipe instead of two lines. We are currently assuming that the backwash branches will have 1/2 the slot area of the branches in the other layers.
#
# Slot head loss issues
# If we use the slots to generate head loss in an effort to improve flow distribution, we need to account for sand blocking (1-ε) of the slots during filtration. The slots are not blocked during backwash (except perhaps during backwash initiation).
#
# Backwash mode constraints
# The  constraint on the design of the backwash manifold branches is that the flow rate from each slot must be close to the average (perhaps within 20%). We cannot rely on head loss through the filter media to help create uniform flow from the manifold during backwash because the filter bed will be fluidized. Thus we must design the backwash manifold to have uniform flow distribution without any external assistance. We can improve uniformity of flow distribution by decreasing head loss and pressure recovery in the manifold branches and in the trunk line and/or by increasing the head loss through the slots. The backwash system will also be used during filtration and the flow rate in the backwash manifold system will vary by a factor of 6 between those two states. Thus head loss through the slots will vary by a factor of 36 between the two states. We could use a relatively high slot head loss to get uniform flow distribution. The slot head loss must be small enough during filtration mode to not cause a flow inbalance between filter layers. That suggests that the slot head loss must be less than 10% of the clean bed head loss during filtration and thus less than 36 times that amount during backwash.
#
# Flow distribution in a short manifold is quite uniform for the case when the total port area is equal to or less than the manifold area. We have two manifold systems operating in series with trunk line distributing flow to branches and branches distributing flow to slots. Head loss through the slots effectively helps distribute flow between branches as well as between slots. Thus the constraints on both trunk and branch sizes are that they have pressure recovery terms that are small compared with the head loss through the slots.
# Algorithm for trunk, branch, slot design
# Head loss through the slots in the backwash manifold are directly related to the head loss throught the slots during filtration. The flow area during filtration will be reduced due to sand blocking. This results in a factor of ε_FiSand
# Calculate slot area for backwash assuming this head loss.
# Note that the slot area for backwash analysis should not be adjusted for sand porosity.
# Calculate size of branch lines using the rule that their area must exceed the port area.
# Given the area of the branch lines, recalculate the slot area by setting it equal to the branch area.
# Recalculate the actual head loss through the slots given this new slot area.
#
# Calculate the size of the trunk lines using the rule that their area must exceed the port area. Thus branches must have more area than the slots in a branch. Trunk must have more area than the branches.
# Top View
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# Layer Thickness as Function of Trunk Diameter
H_FiLayerF(ND_Trunk) := max(H_FiLayerMin, Ceil(outerdiameter(ND_Trunk) + S_FiTrunkMin, 1 cm), Ceil(OuterDiameterFittingPVC(ND_Trunk), 1 cm), Ceil(FerncoOuterDiameter(ND_Trunk), 1 cm))
# round up to the nearest cm to make construction easier
H_FiBottomLayerF(ND_Trunk, ND_BwTrunk) := max(H_FiLayerMin, Ceil(outerradius(ND_Trunk) + outerradius(ND_BwTrunk) + S_FiTrunkMin, 1 cm), Ceil(ConRadius(ND_Trunk) + ConRadius(ND_BwTrunk), 1 cm), Ceil(FerncoOuterDiameter(ND_Trunk)/2 + FerncoOuterDiameter(ND_BwTrunk)/2, 1 cm))
# Ratio of Pressure Recovery to Clean Bed Head Loss
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# Ratio of long path flow to short path flow. We need to develop a better hydraulic model of this system. The piezometric head inside the inlet and outlet manifold systems follow trends that tend to keep the net piezometric head difference between the two pipe networks similar. Thus the expected flow variation is less than what we are modeling here.
Pi_FiManifoldQ := 0.85
Pi_FiManifoldHeadLoss := 1 - Pi_FiManifoldQ^2 = 0.2775
# Ratio of pressure recovery in the slotted pipes to the head loss through the clean bed. This constraint is critical and determines all of the pipe sizes related to the filtration cycle. This is likely still conservative.
# Exit and entrance pipes will have additional head loss. We need to verify that this head loss is acceptable. The constraint is that we don't want excessive head loss through these pipes because that head loss will force us to use a deeper filter box or will result in lower water level elevation in the effluent.
# Trunk Diameter and Layer Thickness Based on Flow Distribution Constraint
Q_FilterMax :=
    for i ∈ 0 .. last(AvailND)
        H_FiLayer ← H_FiLayerF(AvailND[i])
        HL_FiCleanLayer ← h_lKozeny(H_FiLayer, D_FiSand60, V_FiLayer, ε_FiSand, Nu_Water)
        V_FiMaxPR ← sqrt(2*g*(HL_FiCleanLayer*Pi_FiManifoldHeadLoss))
        Q_FilterMax[i] ← π*innerdiameter(AvailND[i], PS_Default)^2/4*V_FiMaxPR*N_FiLayer/2
    return Q_FilterMax
# This function returns the maximum flow rate through a filter for each of the available trunk pipe sizes based on the flow distribution constraint.
# Constraint the number of filters to a reasonable value and increase the depth of the filter bed for large plants. This function needs to eventually be based on cost minimization and what is required for easy operation of the plants.
N_FiMax := min(ceil(Q_Plant/LookupCeil(6 in, AvailND, Q_FilterMax)), 4) = 2
ND_FiTrunk := LookupCeil(Q_Plant/N_FiMax, Q_FilterMax, AvailND) = 6 in
H_FiLayer := H_FiLayerF(ND_FiTrunk) = 20 cm
# Clean Bed Head Loss and Maximum Manifold Velocity
HL_FiCleanLayer := h_lKozeny(H_FiLayer, D_FiSand60, V_FiLayer, ε_FiSand, Nu_Water) = 5.56209 cm
PR_FiManifoldMax := HL_FiCleanLayer*Pi_FiManifoldHeadLoss
HL_FiBwSlotsEst := 3 cm
PR_FiBwManifoldMax := HL_FiBwSlotsEst*Pi_FiManifoldHeadLoss
V_FiMaxPR := sqrt(2*g*PR_FiManifoldMax) = 0.550207 m/s
V_FiBwMaxPR := sqrt(2*g*PR_FiBwManifoldMax) = 0.40408 m/s
# Number of Filters, Flow Rate Calculations, and Backwash Trunk Diameter
Q_FiMax := π*innerdiameter(ND_FiTrunk, PS_Default)^2/4*V_FiMaxPR*N_FiLayer/2 = 30.9485 L/s
N_Fi := min(ceil(ceil(Q_Plant/Q_FiMax)/2) + 2, N_FiMax) = 2
Q_Fi := Q_Plant/N_Fi = 16 L/s  # The flow will be divided evenly between the N_Fi = 2 filters.
A_FiActive := Q_Fi/(N_FiLayer*V_FiLayer) = 1.45455 m^2  # This is the required area of each of the N_Fi = 2 filters.
Q_FiLayer := Q_Fi/N_FiLayer = 2.66667 L/s  # This is the flow rate through each filter layer
ND_FiBwTrunk := NominalDiameter(CeilNearest(D_circle(Q_Fi/V_FiMaxPR), AvailPipeSizes(PS_Default)[:, 0]), PS_Default) = 8 in
# Auxilliary Box Widths Must Match Filter Box Width
W_FiEntrance := max(3*S_Fitting + ConRadius(ND_FiBwTrunk) + 3*ConRadius(ND_FiTrunk) + 2*(SocketDepth(ND_FiTrunk) + ElbowRadius(ND_FiTrunk)), W_HumanMin, W_rectweir(Q_Fi, 5 cm)) = 1.11569 m
W_FiOverflow := OuterDiameterFittingPVC(ND_DistPipe) + 2*S_Fitting = 0.336537 m
W_FiMin := W_FiEntrance + W_FiOverflow + 2*T_PlantWall - T_FiWall = 1.50223 m
W_FiActiveMin := W_FiMin - outerdiameter(ND_FiBwTrunk) = 1.28316 m
# Number of Manifold Branches
Q_FiManBranchMax := V_FiMaxPR*π*innerdiameter(ND_FiManBranch, PS_FiBranch)^2/4 = 0.306785 L/s
Q_FiManBranchAve := Q_FiManBranchMax/(1 + (1 - Pi_FiManifoldQ)/2) = 0.285381 L/s
# branches are coming out of both sides of the manifold
N_FiManBranchMin := Ceil(Q_FiLayer/Q_FiManBranchAve, 2) = 10
N_FiManBranchMax := 2*floor(Q_FiLayer/(V_FiLayer*B_FiManifoldBranch*W_FiActiveMin)) = 22
N_FiManBranch := N_FiManBranchMax = 22
Q_FiManBranch := Q_FiLayer/N_FiManBranch = 0.121212 L/s
# Backwash Manifold Design and Slot Area
Q_FiBwManBranch := Q_Fi/N_FiManBranch = 0.727273 L/s
A_FiBwManBranches := N_FiManBranch*π*innerdiameter(ND_FiBwManBranch, PS_FiBranch)^2/4 = 288.956 cm^2
A_FiBwLayerSlots := A_FiBwManBranches = 288.956 cm^2  # Using same size slots as total branch area to get reasonable flow distribution.
HL_FiBwSlot := h_orifice(D_circle(A_FiBwLayerSlots), Pi_VenaContractaOrifice, Q_Fi) = 3.93863 cm
# These calculations are just to check what flow distribution we get from conserving area between the branches and the slots.
PR_FiBwManBranch := (Q_FiBwManBranch/(π*innerdiameter(ND_FiBwManBranch, PS_FiBranch)^2/4))^2/(2*g)
Pi_FiBwManifoldQ := sqrt((HL_FiBwSlot - PR_FiBwManBranch)/HL_FiBwSlot) = 0.776595
# Check that head loss through the backwash slots is small in filtration mode (we want good flow distribution between layers, so the bottom layer should not have significantly more slot head loss)
HL_FiBwSlotForward := h_orifice(D_circle(A_FiBwLayerSlots*ε_FiSand), Pi_VenaContractaOrifice, Q_FiLayer) = 0.683789 cm
# Inner manifolds have double the slot area of the upper and lower manifolds
A_FiLayerSlots := 2*A_FiBwLayerSlots = 577.912 cm^2
HL_FiSlot := (2*Q_FiLayer/(Pi_VenaContractaOrifice*A_FiLayerSlots*ε_FiSand))^2*1/(2*g) = 0.683789 cm
# A conservative estimate of the head loss through the slots of the normal inlet manifold given sand blockage
# Filter Box Dimensions and Pipe Lengths
W_FiActive := 2*Q_FiManBranch/(V_FiLayer*(B_FiManifoldBranch + 2*(L_FiManFerncoCoupling + CapThickness(ND_FiBwTrunk))/N_FiManBranch)) = 1.26622 m
# This is only the active filtration width (does not include the projected area of the trunk lines, but we assume the space between the branch holders contributes to active area)
W_Fi := W_FiActive + OuterDiameterFittingPVC(ND_FiBwTrunk) = 1.50276 m
L_Fi := N_FiManBranch/2*B_FiManifoldBranch + L_FiManFerncoCoupling + CapThickness(ND_FiBwTrunk) = 1.14873 m
L_FiManBranch := W_Fi/2 - outerradius(ND_FiTrunk) - outerdiameter(ND_FiBranchHolder) + 2*L_FiManBranchExt - S_FiManAssembly = 62.6916 cm
L_FiBwManBranch := W_Fi/2 - outerradius(ND_FiBwTrunk) - outerdiameter(ND_FiBwBranchHolder) + 2*L_FiManBranchExt - S_FiManAssembly = 57.2941 cm
L_FiTrunk := L_Fi - L_FiManFerncoCoupling/2 - CapThickness(ND_FiTrunk)
L_FiBwTrunk := L_Fi - L_FiManFerncoCoupling/2 - CapThickness(ND_FiBwTrunk)
L_FiBranchHolder := L_Fi - 2*CapThickness(ND_FiBranchHolder) - 2*S_FiManAssembly
L_FiBwBranchHolder := L_Fi - 2*CapThickness(ND_FiBwBranchHolder) - 2*S_FiManAssembly
# Bottom Layer Thickness, Total Sand Depth, and Backwash Head Loss
H_FiBottomLayer := H_FiBottomLayerF(ND_FiTrunk, ND_FiBwTrunk) = 0.23 m
HL_FiCleanBottomLayer := h_lKozeny(H_FiBottomLayer, D_FiSand60, V_FiLayer, ε_FiSand, Nu_Water) = 6.3964 cm
H_FiSand := (N_FiLayer - 1)*H_FiLayer + H_FiBottomLayer = 1.23 m
H_FiFluidizedBed := Pi_FiFluidized*H_FiSand = 1.599 m
HL_FiBwSS := H_FiSand*(Rho_FiSand - Rho_H2O)*(1 - ε_FiSand)/Rho_H2O = 1.2177 m  # Sand bed head loss during steady state backwash.
# The backwash head loss is almost exactly equal  to the sand bed depth. Note that this ignores losses in the plumbing.
HL_FiTerminal := 2*H_FiLayer = 0.4 m
HL_FiDirty := HL_FiTerminal - HL_FiCleanLayer = 34.4379 cm
# Does not include the clean bed head loss. We are limiting the head loss gradient to a value of 1. At this head loss an entire upflow layer of sand will become bouyant.
HL_FiBwInitiation := HL_FiBwSF + HL_FiBwSS = 1.4177 m
# Plumbing Head Loss
HL_FiBwInletManifold := 1/3*h_f(Q_Fi, innerD(ND_FiBwTrunk, PS_Default), L_Fi, Nu_Water, E_Pvc) + h_e(Q_Fi/N_FiManBranch, innerD(ND_FiBwManBranch, PS_FiBranch), K_PipeEnt) + 1/3*h_f(Q_Fi/N_FiManBranch, innerD(ND_FiBwManBranch, PS_FiBranch), W_FiActive, Nu_Water, E_Pvc) + HL_FiBwSlot = 5.2755 cm
HL_FiInletManifold := 1/3*h_f(2*Q_FiLayer, innerD(ND_FiTrunk, PS_Default), L_Fi, Nu_Water, E_Pvc) + h_e(2*Q_FiLayer/N_FiManBranch, innerD(ND_FiManBranch, PS_FiBranch), K_PipeEnt) + 1/3*h_f(2*Q_FiLayer/N_FiManBranch, innerD(ND_FiManBranch, PS_FiBranch), L_FiManBranch, Nu_Water, E_Pvc) + HL_FiSlot = 1.46857 cm
HL_FiInletManifoldTop := 1/3*h_f(Q_FiLayer, innerD(ND_FiTrunk, PS_Default), L_Fi, Nu_Water, E_Pvc) + h_e(Q_FiLayer/N_FiManBranch, innerD(ND_FiManBranch, PS_FiBranch), K_PipeEnt) + 1/3*h_f(Q_FiLayer/N_FiManBranch, innerD(ND_FiManBranch, PS_FiBranch), L_FiManBranch, Nu_Water, E_Pvc) + HL_FiSlot = 0.890106 cm
HL_FiInletManifoldBottom := 1/3*h_f(Q_FiLayer, innerD(ND_FiBwTrunk, PS_Default), L_Fi, Nu_Water, E_Pvc) + h_e(Q_FiLayer/N_FiManBranch, innerD(ND_FiBwManBranch, PS_FiBranch), K_PipeEnt) + 1/3*h_f(Q_FiLayer/N_FiManBranch, innerD(ND_FiBwManBranch, PS_FiBranch), L_FiManBranch, Nu_Water, E_Pvc) + HL_FiSlot = 0.717301 cm
HL_FiOutletManifold := 1/3*h_f(2*Q_FiLayer, innerD(ND_FiTrunk, PS_Default), L_Fi, Nu_Water, E_Pvc) + h_e(2*Q_FiLayer/N_FiManBranch, innerD(ND_FiManBranch, PS_FiBranch), K_PipeExit) + 1/3*h_f(2*Q_FiLayer/N_FiManBranch, innerD(ND_FiManBranch, PS_FiBranch), L_FiManBranch, Nu_Water, E_Pvc) = 1.26668 cm
# For the head loss through the outlet manifold:
# Does it make sense to have a pipe exit loss included?
# Also, is it worth coming up with an estimate for head loss through the slots entering the branch?
HL_FiOutletStubs := Headloss_weir(Q_FiLayer, innerdiameter(ND_FiTrunk, PS_Default)) = 4.41565 cm
HL_FiInletPlumbing1 := h_l(Q_FiLayer, innerD(ND_FiTrunk, PS_Default), 3 m, 3*K_El90 + K_PipeEnt, Nu_Water, E_Pvc) + HL_FiInletManifoldTop = 1.27444 cm
HL_FiInletPlumbing2 := h_l(2*Q_FiLayer, innerD(ND_FiTrunk, PS_Default), 3 m, 3*K_El90 + K_PipeEnt, Nu_Water, E_Pvc) + HL_FiInletManifold = 2.98075 cm
HL_FiInletPlumbing3 := h_l(2*Q_FiLayer, innerD(ND_FiTrunk, PS_Default), 3 m, K_El90 + K_PipeEnt, Nu_Water, E_Pvc) + HL_FiInletManifold = 2.23819 cm
# These are numbered from the top of the filter bed down. The top and bottom inlets have half the flow rate (on serve the layers below and above, respectively). The bottom inlet has the diameter of the backwash trunk.
HL_FiInletPlumbing4 := h_l(Q_FiLayer, innerD(ND_FiBwTrunk, PS_Default), 3 m, K_El90 + K_PipeEnt, Nu_Water, E_Pvc) + HL_FiInletManifoldBottom = 0.782639 cm
HL_FiInletPlumbingMax := max(HL_FiInletPlumbing1, HL_FiInletPlumbing2, HL_FiInletPlumbing3, HL_FiInletPlumbing4) = 2.98075 cm
HL_FiInletPlumbingMin := min(HL_FiInletPlumbing1, HL_FiInletPlumbing2, HL_FiInletPlumbing3, HL_FiInletPlumbing4) = 0.782639 cm
HL_FiBwInletPlumbing := h_l(Q_Fi, innerD(ND_FiBwTrunk, PS_Default), 3 m, K_El90 + K_PipeEnt, Nu_Water, E_Pvc) + HL_FiBwInletManifold = 7.48378 cm
HL_FiOutletPlumbing1 := h_l(2*Q_FiLayer, innerD(ND_FiTrunk, PS_Default), 3 m, K_El90 + K_PipeExit, Nu_Water, E_Pvc) + HL_FiOutletManifold = 2.24257 cm
HL_FiOutletPlumbing2 := HL_FiOutletPlumbing1 = 2.24257 cm
HL_FiOutletPlumbing3 := h_l(2*Q_FiLayer, innerD(ND_FiTrunk, PS_Default), 3 m, 2*K_El90 + K_PipeExit, Nu_Water, E_Pvc) + HL_FiOutletManifold = 2.61385 cm
HL_FiOutletPlumbingMax := max(HL_FiOutletPlumbing1, HL_FiOutletPlumbing2, HL_FiOutletPlumbing3) = 2.61385 cm
HL_FiOutletPlumbingMin := min(HL_FiOutletPlumbing1, HL_FiOutletPlumbing2, HL_FiOutletPlumbing3) = 2.24257 cm
# Path Head Loss Calculations and Flow Distribution Between Layers
HL_FiPathClean1 := HL_FiInletPlumbing1 + HL_FiCleanLayer + HL_FiOutletPlumbing1 = 9.07909 cm
HL_FiPathClean2 := HL_FiInletPlumbing2 + HL_FiCleanLayer + HL_FiOutletPlumbing1 = 10.7854 cm
HL_FiPathClean3 := HL_FiInletPlumbing2 + HL_FiCleanLayer + HL_FiOutletPlumbing2 = 10.7854 cm
HL_FiPathClean4 := HL_FiInletPlumbing3 + HL_FiCleanLayer + HL_FiOutletPlumbing2 = 10.0428 cm
HL_FiPathClean5 := HL_FiInletPlumbing3 + HL_FiCleanLayer + HL_FiOutletPlumbing3 = 10.4141 cm
HL_FiPathClean6 := HL_FiInletPlumbing4 + HL_FiCleanBottomLayer + HL_FiOutletPlumbing3 = 9.79289 cm
HL_FiPathCleanMax := max(HL_FiPathClean1, HL_FiPathClean2, HL_FiPathClean3, HL_FiPathClean4, HL_FiPathClean5, HL_FiPathClean6)
HL_FiPathCleanMin := min(HL_FiPathClean1, HL_FiPathClean2, HL_FiPathClean3, HL_FiPathClean4, HL_FiPathClean5, HL_FiPathClean6)
Pi_QFiLayer := sqrt(HL_FiPathCleanMin/HL_FiPathCleanMax) = 0.917493
# Slotted Pipe Design
# The slots should be configured to provide this total amount of slot area for the
# bottom manifold handling the backwash flow. We will define this as the inner diameter area of the slots
A_FiBwBranchSlots := A_FiBwLayerSlots/N_FiManBranch = 13.1344 cm^2
# This is the amount of slot area that must be available for each length of pipe.
A_FiBranchSlots := A_FiLayerSlots/N_FiManBranch = 26.2687 cm^2
L_FiBwManSlotBranchTotal := A_FiBwBranchSlots/W_FiManSlots = 6.46376 m  # The slots on each pipe must have this total length to provide the required area.
L_FiManSlotBranchTotal := A_FiBranchSlots/W_FiManSlots = 12.9275 m
# We select  B_FiBwManSlot := 3/16*in = 4.7625 mm  for the closest slot spacing, and N_FiBwSlotRows := 2  for best structural integrity of these pipes
# We select  B_FiManSlot := 0.125 in = 3.175 mm  for the closest slot spacing, and N_FiSlotRows := 2  for best structural integrity of these pipes
N_FiBwManSlots := floor(N_FiBwSlotRows*2*(L_FiBwManBranch - 2*L_FiManBranchExt)/B_FiBwManSlot) = 447
# Over the active area of the filter, there will be N_FiBwManSlots = 447slots whose area will effectively
# contribute to the total required slot area
N_FiManSlots := floor(N_FiSlotRows*2*(L_FiManBranch - 2*L_FiManBranchExt)/B_FiManSlot) = 739
# Over the active area of the filter, there will be N_FiManSlots = 739slots whose area will effectively
# contribute to the total required slot area
C_FiBwManInner := π*innerdiameter(ND_FiBwManBranch, PS_FiBranch) = 5.05796 in
L_FiBwManSlotCurvedInner := L_FiBwManSlotBranchTotal/N_FiBwManSlots = 0.569304 in
C_FiManInner := π*innerdiameter(ND_FiManBranch, PS_FiBranch) = 3.29553 in
C_FiBwManOuter := π*outerdiameter(ND_FiBwManBranch) = 5.96903 in
L_FiManSlotCurvedInner := L_FiManSlotBranchTotal/N_FiManSlots = 0.688711 in
C_FiManOuter := π*outerdiameter(ND_FiManBranch) = 4.13119 in
L_FiBwManSlotCurvedOuter := L_FiBwManSlotCurvedInner*C_FiBwManOuter/C_FiBwManInner = 0.671849 in
L_FiManSlotCurvedOuter := L_FiManSlotCurvedInner*C_FiManOuter/C_FiManInner = 0.863351 in
L_FiBwManSlotOuter := 2*outerradius(ND_FiBwManBranch)*sin(2*π*L_FiBwManSlotCurvedOuter/C_FiBwManOuter/2) = 0.657936 in
L_FiManSlotOuter := 2*outerradius(ND_FiManBranch)*sin(2*π*L_FiManSlotCurvedOuter/C_FiManOuter/2) = 0.80265 in
N_FiBwManBranchTotal := N_Fi*N_FiManBranch = 44
N_FiManBranchTotal := N_Fi*(N_FiLayer - 1)*N_FiManBranch = 220
# SPECIFICATIONS:  we need  N_FiBwManBranchTotal = 44 pipes of diameter  ND_FiBwManBranch = 1.5 in, with slots of width W_FiManSlots = 0.2032 mm, straight length L_FiBwManSlotOuter = 16.7116 mm  and a spacing of  B_FiBwManSlot = 0.1875 in
# SPECIFICATIONS:  we need  N_FiManBranchTotal = 220 pipes of diameter  ND_FiManBranch = 1 in  with slots of width  W_FiManSlots = 0.2032 mm,straight length L_FiManSlotOuter = 20.3873 mm, and a spacing of B_FiManSlot = 0.125 in
P_FiBwManBranches := N_FiBwManBranchTotal*L_FiBwManBranch*(12*USD/(5 ft)) = 198.499 USD
P_FiManBranches := N_FiManBranchTotal*L_FiManBranch*(9*USD/(5 ft)) = 814.497 USD
# Siphon Design
# Need a flow rate in order to determine HL through the siphon tube
#
# Siphon has to handle the entire flow into the filter plus drain the terminal head in Ti.FiBwInitiation.  This is approximately a "hole in a bucket problem" so the average flow rate is half the max flow (hence the factor of 2).  The HL sum corresponds to the height of water that needs to be drained; this ignores HL in the siphon because we don't know it yet, but it should be small...
Q_FiSiphonDesign := Q_Fi + 2*A_FiActive*(HL_FiBwInitiation + HL_FiBwInletPlumbing)/Ti_FiBwInitiationBod = 40.1218 L/s
K_FiSiphon := 5*K_El90 + K_PipeExit + K_PipeEnt + 1 = 7
# Minor loss coefficients for flow through the siphon.
# 1 is from losses through the branched path of a Tee
D_FiSiphonGuess := nthroot(K_FiSiphon*8/(g*π^2)*Q_FiSiphonDesign^2/(HL_FiBwInitiation + HL_FiBwInletPlumbing), 4) = 6.22253 in
# Minor Loss Equation rearranged to solve for D, not necessarily an available pipe size
D_FiSiphonSSGuess := nthroot(K_FiSiphon*8/(g*π^2)*Q_Fi^2/h_eFiSiphonMax, 4) = 6.49472 in
ND_FiSiphon := NominalPipeSize(max(D_FiSiphonGuess, D_FiSiphonSSGuess)) = 8 in
# This selects the more limiting case; appears it is SS
HL_FiSiphon := h_e(Q_Fi, innerD(ND_FiSiphon, PS_Default), K_FiSiphon) = 9.03967 cm  # Head loss through the siphon
HL_FiSiphonInitiation := h_e(Q_FiSiphonDesign, innerD(ND_FiSiphon, PS_Default), K_FiSiphon) = 56.8426 cm
Rho_FiFluidized := (Rho_H2O*H_FiSand*ε_FiSand + Rho_H2O*H_FiSand*ε_FiSand*(Pi_FiFluidized - 1) + Rho_FiSand*H_FiSand*(1 - ε_FiSand))/(H_FiSand*Pi_FiFluidized) = 1623.08 kg/m^3
Rho_FiFluidized := (Rho_H2O*H_FiSand*ε_FiSand*Pi_FiFluidized^2 + Rho_FiSand*H_FiSand*(1 - ε_FiSand))/(H_FiSand*Pi_FiFluidized) = 1743.08 kg/m^3
Rho_FiFluidized := Rho_H2O*ε_FiSand*Pi_FiFluidized + Rho_FiSand*(1 - ε_FiSand)/Pi_FiFluidized = 1743.08 kg/m^3
B_FiSiphonManOrificesEst := 10 cm
N_FiSiphonManOrifices := 2*floor((L_Fi - 2*ConRadius(ND_FiSiphon))/(2*B_FiSiphonManOrificesEst)) = 8
D_FiSiphonManOrifices := CeilNearest(innerdiameter(ND_FiSiphon, PS_Default)/sqrt(N_FiSiphonManOrifices), D_Drill) = 0.0711326 m
# This keeps the area of the orifices the same as the siphon area.
B_FiSiphonManOrifices := (L_Fi - 2*ConRadius(ND_FiSiphon))/N_FiSiphonManOrifices = 11.4024 cm
HL_FiSiphonOrifice := 1/(2*g)*(Q_Fi/N_FiSiphonManOrifices/(Pi_VenaContractaOrifice*π*(D_FiSiphonManOrifices/2)^2))^2 = 3.25367 cm
HL_FiSiphonOrificeInitiation := 1/(2*g)*(Q_FiSiphonDesign/N_FiSiphonManOrifices/(Pi_VenaContractaOrifice*π*(D_FiSiphonManOrifices/2)^2))^2 = 20.4595 cm
HL_FiSiphonOutlet := Headloss_weir(Q_Fi, innerD(ND_FiSiphon, PS_Default)) = 12.227 cm
HL_FiSiphonOutletInitiation := Headloss_weir(Q_FiSiphonDesign, innerD(ND_FiSiphon, PS_Default)) = 22.5681 cm
HL_FiBwTotalSS := HL_FiBwInletPlumbing + HL_FiBwSS + HL_FiSiphonOrifice + HL_FiSiphon + HL_FiSiphonOutlet = 1.53774 m
# Entrance and Overflow Weirs
L_FiEntranceWeir := W_FiEntrance = 1.11569 m
HL_FiEntranceWeir := Headloss_weir(Q_Fi, L_FiEntranceWeir) = 3.90272 cm
L_FiOverflowWeir := 2*ConRadius(ND_FiBwTrunk) + 2*ConRadius(ND_FiTrunk) + 3*S_Fitting
HL_FiOverflowWeir := Headloss_weir(Q_Fi, L_FiOverflowWeir) = 6.10189 cm
# Entrance Pipe from Sedimentation
L_FiEntrancePipeEst := W_DCWalkway + W_SedInletChannel + 1 m = 2.57854 m
# The extra 1 meter is for the vertical section where the pipe drops down from the sed tank exit channel.
K_FiEntrancePipe := K_El90 + K_PipeEnt + K_PipeExit = 2.4
HL_FiEntrancePipeTarget := 15 cm
ND_FiEntrancePipeMax := FloorNearest(Pipesizes[index(FloorNearest(W_SedBay/2 - ConRadius(ND_SedManifold) - 2*S_Fitting, Pipesizes[:, 1]), Pipesizes[:, 1]), 0], AvailND) = 8 in
ND_FiEntrancePipe := min(D_pipeschedule(Q_Plant, PS_Default, HL_FiEntrancePipeTarget, L_FiEntrancePipeEst, Nu_Water, E_Pvc, K_FiEntrancePipe), ND_FiEntrancePipeMax) = 8 in
N_FiEntrancePipes := ceil(Q_Plant/Q_pipetotal(innerdiameter(ND_FiEntrancePipe, PS_Default), HL_FiEntrancePipeTarget, L_FiEntrancePipeEst, Nu_Water, E_Pvc, K_FiEntrancePipe)) = 1
Q_FiEntrancePipe := Q_Plant/N_FiEntrancePipes = 32 L/s
HL_FiEntrancePipe := h_l(Q_Plant, innerdiameter(ND_FiEntrancePipe, PS_Default), L_FiEntrancePipeEst, K_FiEntrancePipe, Nu_Water, E_Pvc) = 13.6819 cm
# Elevations
ZW_FiInletChannel := Z_SedWeirExit - HL_ChannelMax - HL_FiEntrancePipe = 1.64217 m
Z_FiEntranceWeir := ZW_FiInletChannel - HL_FiEntranceWeir = 1.60314 m
ZW_FiEntranceMax := Z_FiEntranceWeir - H_FiWeirFreefall = 1.57314 m
ZW_FiEntranceCleanForward := ZW_FiEntranceMax - HL_FiDirty = 1.22876 m
Z_FiEntranceStubs := ZW_FiEntranceMax - HL_FiDirty - H_FiForwardNoSuckAir = 1.12876 m
Z_FiEntranceBottomFitPipes := Z_SedChannelBottom - max(CouplingLength(ND_FiEntrancePipe), T_PlantWall) - ElbowRadius(ND_FiEntrancePipe) - ConRadius(ND_FiEntrancePipe) - S_Fitting - SocketDepth(ND_FiEntrancePipe) = 0.753222 m
Z_FiEntranceBottomBw := Z_FiEntranceStubs - HL_FiBwSF - H_FiBwNoSuckAir = 0.728762 m
Z_FiEntranceBottom := min(Z_FiEntranceBottomFitPipes, Z_FiEntranceBottomBw) = 0.728762 m
ZW_FiBwSS := Z_FiEntranceBottom + H_FiBwNoSuckAir = 0.928762 m
Z_FiExitStubs := ZW_FiEntranceCleanForward - HL_FiPathCleanMax - HL_FiOutletStubs = 1.07675 m
Z_FiOverflowWeir := ZW_FiEntranceMax - HL_FiOverflowWeir = 1.51212 m
Z_FiSiphonOutlet := Z_FiEntranceBottom + H_FiBwNoSuckAir - HL_FiBwTotalSS = -0.60898 m
# The top of the pipe stub on the siphon where it discharges into the drain channel.
Z_FiSiphonInlet := Z_FiSiphonOutlet - H_FiSiphonNoSuckAir = -0.70898 m
Z_FiBottom := Z_FiSiphonInlet - H_FiFluidizedBed - H_FiFluidizedBedToSiphon - ConRadius(ND_FiBwManBranch) = -2.53655 m
H_FiEntrance := ZW_FiInletChannel + H_PlantFreeboard - Z_FiEntranceBottom = 1.01341 m
Z_FiTop := Z_FiEntranceBottom + H_FiEntrance = 1.74217 m
H_Fi := Z_FiTop - Z_FiBottom = 4.27872 m
# The length of the siphon is estimated here because we don't yet know all the required elevations. Major losses aren't that significant and so the length estimate doesn't cause significant errors.
Q_FiSiphonMax := Q_pipetotal(innerD(ND_FiSiphon, PS_Default), ZW_FiEntranceMax - HL_FiBwInletPlumbing - HL_FiBwInitiation - □, 4 m, Nu_Water, E_Pvc, K_FiSiphon)  # error: This placeholder is empty.
# This time estimate is approximate. The flow is varying with time. The factor of 2 is an approximate integration constant. (average flow is half the max). But this doesn't account correctly for the influence of the constant filtration flow.
Ti_FiBwInitiation := 2*A_FiActive*(HL_FiBwInitiation + HL_FiBwInletPlumbing)/(Q_FiSiphonMax - Q_Fi)
H_FiCheck := H_FiFluidizedBed + H_FiFluidizedBedToSiphon + HL_FiBwInitiation + H_PlantFreeboard + H_FiSiphonNoSuckAir + HL_FiBwInletPlumbing + HL_FiSiphon + HL_FiEntranceWeir + ConRadius(ND_FiBwManBranch) = 3.64954 m
# Just done to verify that the H.Fi calculation is correct.  See the wiki for a picture.
# Entrance Box Baffle, Air Removal Block, and Total Length
# Space between the entrance box wall and the baffle
S_FiEntranceBaffle := ((Q_Fi/T_ChannelWall)^2/g)^(1/3)
S_FiBaffleToBlock := ((Q_Fi/T_ChannelWall)^2/g)^(1/3)
Z_FiAirRemovalBlockBottom := 0.15*S_FiEntranceBaffle + Z_FiEntranceBottom
Z_FiAirRemovalBlockTop := ZW_FiBwSS - H_FiAirRemovalBlockSubmerged = 0.878762 m
W_FiAirRemovalBlock := T_SedWeir  # make this a generic weir thickness at some point?
L_FiEntrance := L_FiOverflowWeir + S_FiEntranceBaffle + S_FiBaffleToBlock + 2*T_SedWeir
# Overflow Box Elevation and Length
ND_FiOverflow := NominalPipeSize(D_PipeTotal(1.5*Q_Fi, 1 m, 1 m, Nu_Water, E_Pvc, K_PipeExit + K_El90 + K_PipeEnt)) = 6 in
L_FiOverflow := L_FiEntrance
H_FiOverflow := 2*S_Fitting + OuterDiameterFittingPVC(ND_FiOverflow) = 0.28415 m
Z_FiOverflowBottom := Z_FiTop - H_FiOverflow = 1.45802 m
# How much does the filter bed over fluidize when the entrance box level lowers after backwash initiation?
H_FiFluidizedBedVariation := (HL_FiBwInitiation - HL_FiBwSS)*(W_FiEntrance^2 - 3*OuterDiameterFittingPVC(ND_FiTrunk)^2/4*π)/A_FiActive = 0.16017 m
HL_FiBwInitiation - HL_FiBwSS = 0.2 m
HL_FiBwInletPlumbing = 7.48378 cm
Q_Ratio := sqrt((HL_FiBwInitiation - HL_FiBwSS)/HL_FiBwInletPlumbing) = 1.63476
# We will leave the bottom of these tanks at a low elevation (that we have calculated) and add pipe stubs as needed. We need to experiment with free fall in the backwash pipe and with the inevitable entrainment of air to see if that is a problem. There will be a tradeoff between air entrainment and fluidized bed expansion. We may want to include an air vent in the backwash pipe (T with vertical leg returning to above original water height to vent air).
# Calculate the dimensions of the exit box
ND_FiExitWaste := NominalPipeSize(D_PipeTotal(Q_Fi, 2 m, 1 m, Nu_Water, E_Pvc, K_PipeExit + K_PipeEnt + 2*K_El90)) = 4 in
# Calculate ND for the waste pipe (check this)
# This means the water level in the entrance box will actually be 10 cm higher than we assumed in previous calculations to ensure BW initiation (aka we have a 10cm SF for BW initiation)
# The goal is to have water start overflowing from the entrance tank when the filter reaches terminal head loss
Z_SedWeirExit - Z_FiExitWeir =  # error: This variable is undefined.  # This is the energy used to filter water
Z_FiEntranceWeir - Z_FiExitWeir =  # error  # Difference in heights for the Exit and Entrance weirs
# The first two terms determine the height of the water at BW SS.  The additonal terms calculates the additional height to prevent the pressure in the lowest outlet pipe from causing backwash water to flow into the exit box.
Z_FiExitPipeStubMin := Z_FiBwWeir + HL_FiSiphonSS + (HL_FiBwSS*(H_FiFluidizedBed - H_FiLayer)/H_FiFluidizedBed)
Z_FiExitBottom := Z_FiEntranceBottom = 0.728762 m
# The bottom of the tank is currently above the minimum stub height in the exit box and thus pipe stubs are not needed in the exit box to prevent flow of water during backwash.
ZW_FiExit := Z_FiExitWeir + HL_FiDistWeir
H_FiExit := H_FiEntrance = 1.01341 m
HW_FiExit := ZW_FiExit - Z_FiExitBottom
L_FiExit := L_FiDistWeir
W_FiExit := W_FiEntrance = 1.11569 m
W_Fi + OuterDiameterFittingPVC(ND_FiBwTrunk) - (W_FiExit + .5*OuterDiameterFittingPVC(ND_DistPipe)) = 0.505332 m
# This is a check to make sure the  entrance/exit boxes in different filters did not overlap
Z_FiInletChannelBottom := Z_FiExitBottom
HW_FiInletChannel := ZW_FiInletChannel - Z_FiInletChannelBottom
H_FiInletChannel := HW_FiInletChannel + H_PlantFreeboard
W_FiInletChannel := max(W_HorizChannelMin(Q_Plant, HW_FiInletChannel, L_FiEntrancePipeEst, Nu_Water, E_Pvc, 0), 2*ConRadius(ND_FiEntrancePipe) + 2*S_Fitting)
# Calculate the dimensions of the backwash box
# Minimum height of water in the filter box during filtration
ZW_FiStart := Z_FiExitWeir + HL_FiOutletPlumbing + HL_FiCleanLayer + HL_FiEntranceWeir
# This is the center line of the pipe through the wall.  This is a maximum based on zero flow and the goal of wanting to be able to initiate backwash at the beginning of filtration. This constraint could be relaxed if needed.
Z_FiSiphonCouplingMax := Z_FiExitWeir - outerdiameter(ND_FiSiphon)/2
H_FiSiphonMax := ZW_FiEntranceMax - Z_FiBwWeir
# I ignore head loss in inlet pipe because the top inlet has 1/4 the head loss of the inlets that send water to two layers.
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L_FiSiphonTop := L_Fi/2 + ShortTeeLength(ND_FiBwManBranch) + T_PlantWall = 0.781516 m
P_Atm := 1 atm
Z_FiSiphonCouplingMin := ZW_FiEntranceMax - HL_FiInletPlumbing - (H_FiSiphonMax - HL_FiSiphonSS)*P_Atm/(Rho_H2O*g*(L_FiSiphonTop + H_FiSiphonMax) + 2*P_Atm) + outerdiameter(ND_FiSiphon)/2
# The water trap part of the siphon tube must be Z_FiSiphonCouplingMin = below the Z_FiBwWeir = in order to prevent air from leaking out of the siphon.
Z_FiSiphonWatersealMax := Z_FiBwWeir - Z_FiSiphonCouplingMin
# It appears that we could safely raise the water trap part of the siphon above the level of the bottom of the filter if that is desirable. The top of the elbow that turns the siphon tube horizontal should be at the Z_FiSiphonWatersealMax elevation.
Z_FiSiphonCoupling := Z_FiSiphonCouplingMax
# This is based on the constraint that we want the siphon to function at half flow rate (and it would actually work at zero flow as well). The siphon is completely submerged if water is flowing across the exit weir.
Z_FiSiphonCouplingMax - Z_FiSiphonCouplingMin =  # error
# Not much room to spare here! We need to always check this and somehow report an error if this is negative!!!!
H_FiBwWeir := max(Z_FiBwWeir, H_SedWeirExit/2)
# Z.FiBwWeir - 0 will bring the bottom of the backwash box to the top of the drain channel. If that number is negative, it will be at least as deep as half of the sed weir
# We decided we could simultaneous make the box shallow and the pipe the shortest it could be by raising the bottom of the filter box.  In the event we want to change that constraint, this is the amount of room we have to play with.  For every cm we lower this, we lowert he other end 1 cm plus another 1.5cm to ensure air doesn't leak out.  We can use this to calculate a min
H_FiBw := H_FiBwWeir + H_PlantFreeboard + HL_FiBwWeir
Q_FiSiphonMax =  # error  # Just for reference
W_FiBw := max(W_ChannelMin, 2*(S_Fitting + 2*ConRadius(ND_FiSiphon)), W_HorizChannel(Q_FiSiphonMax*N_Fi*(1 + N_Fi > 1), H_FiBw, HL_FiBwWeir, L_FiBwWeir, Nu_Water, E_Concrete, 1))
Z_FiBwBottom := Z_FiBwWeir - H_FiBwWeir
# This is the addition of the two siphon pipes and the drain pipe for the backwash box
Z_FiBwTop := Z_FiBwBottom + H_FiBw
# Calculate the Z of the top of the pipe stubs in the entrance and exit boxes
# 5 cm is for exposed pipe, 1 of the diameters is for the elbow radius
ZW_FiStart =  # error
# We are going to set the top one to some level (20cm) below the min water level (at the beginning of filtration) and then have some distance (5 cm) in between them.
Z_FiEntrancePipes :=
    for i ∈ 0 .. 3
        Z_FiEntrancePipes[0] ← ZW_FiStart - 20 cm if i == 0
        Z_FiEntrancePipes[i] ← Z_FiEntrancePipes[i - 1] - 5 cm otherwise
    return Z_FiEntrancePipes
# This may not be correct for the BW pipe which may need to be shorter, but Monore "really doesn't think so"
Z_FiExitPipes := [
    Z_FiExitWeir - H_FiExitMinDepth;
    Z_FiExitWeir - H_FiExitMinDepth;
    Z_FiExitWeir - H_FiExitMinDepth;
    Z_FiExitPipeStubMin
]
# Calculate the Siphon Valve Size
# The available head is equal to the difference between the bottom of the siphon pipe and the steady state water level in the filter.  This is a head available in terms of water.
HL_FiSiphonValveWater := (Z_FiSiphonCoupling - ND_FiSiphon/2) - (Z_FiBwWeir + HL_FiSiphonSS)
Rho_Air := 1.204*kg/m^3
Vol_FiSiphonAir := (CouplingLength(ND_FiSiphon) + 4*outerdiameter(ND_FiSiphon) + 2*(Z_FiSiphonCoupling - Z_FiBwWeir))*π/4*innerdiameter(ND_FiSiphon, PS_Default)^2
# Goal is to fill siphon tube with air in 1 second. To account for the diminishing head as the siphon tube fills with air we will use 0.5 seconds. This rapid fill is desirable so that the operator can open and then immediately close the valve without having to wait. This is important because the operator won't be able to see the air filling up the siphon tube.
Ti_FiSiphonBreak := 10 s
# Monroe increased this to 1 s (from 0.5 s) because the video of starting backwash showed the operator moving the valve slowly. This indicatess that it wasn't necessary to have such a large valve at Tamara.
# changed to 10s 1/7/2012
Q_FiSiphonAir := Vol_FiSiphonAir/Ti_FiSiphonBreak
HL_FiSiphonValveAir := HL_FiSiphonValveWater*Rho_H2O/Rho_Air  # This is the head available in terms of air.
K_FiSiphonValve := 3
# Entrance and Exit loses and ball valve losses
L_FiSiphonBreak := Z_FiBottom + H_Fi - Z_FiSiphonCoupling
# Estimated length of the pipe that will be connected to the air valve. Air valve will be at the very top of the filter.
ND_FiSiphonAirValve := NominalPipeSize(D_PipeTotal(Q_FiSiphonAir, HL_FiSiphonValveAir, L_FiSiphonBreak, Nu_Air, E_Pvc, K_FiSiphonValve))
# Piping and Fittings
# The last elbow for the backwash trunk line is replaced with a T.  The oppostie direction from the filter is a valve that goes to the waste channel in the event we want to dewater the filter without de-sanding it.
#
# The de-sanding pipe will be sized based on the volume of the fluidized bed being drained in under 5 minutes.  Predict a 3 in pipe
# There will be a tradeoff between air entrainment and fluidized bed expansion. We may want to include an air vent in the backwash pipe (T with vertical leg returning to above original water height to vent air).  (this should not be needed in the design as of late June 2011 because we are keeping the backwash inlet submerged at all times.)
# Sand removal pipe.
H_FiSandOutlet := 1 m  # to be high enough to dump into a 55 gal drum
# This can't be set any higher because the available head will be insufficient to pump sand unless we figure out a way to maintain a higher water level in the filter during the sand dump. See the small head loss available at the finish of pumping the sand below.
Z_FiSandOutlet := Z_FiBottom + H_FiSandOutlet = -1.53655 m
# This is higher than the sed tank drain channel. Thus the backwash water can easily discharge into the drain channel
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Z_FiBwWeir =  # error
Z_FiBottom = -2.53655 m
HL_FiSandOutlet := Z_FiBwWeir - Z_FiSandOutlet  # This isn't quite right because of the different densities.
# Calculating head loss and density for this problem is a bit complicated. The sand bed has a density of
Rho_FiFluidized = 1743.08 kg/m^3
# This ends up changing Nu.Water, but that doesn't change the results because we are in the very turbulent domain of the Moody diagram. The available head has to take into account the different densities of the fluidized bed and the water above the bed. As the fluidized bed is drained the available head will decrease. Would it be possible to drain the sand out of the bed at the very beginning of the backwash cycle while the water depth above the bed is gradually decreasing? This extra bed depth would provide more head to push the sand through the sand outlet.
# At the beginning of sand pumping the filter box has fluidized sand (and thus a high fluid density) and thus the pressure at the entrance to the sand dump is high. At the end of the sand dump the filter is filled with water and thus the pressure at the entrance to the sand dump is much lower and yet the sand dump pipe is still filled with the high density fluidized sand.
HL_FiSandOutletStart := ((Z_FiBwWeir - Z_FiBottom - H_FiSand*Pi_FiFluidized)*Rho_H2O + H_FiSand*Pi_FiFluidized*Rho_FiFluidized + (-H_FiSandOutlet*Rho_FiFluidized))/Rho_FiFluidized
HL_FiSandOutletFinish := ((Z_FiBwWeir - Z_FiBottom)*Rho_H2O + (-H_FiSandOutlet*Rho_FiFluidized))/Rho_FiFluidized
V_FiSand := W_Fi*L_Fi*H_FiSand*Pi_FiFluidized = 2760.3 L  # Total volume of the fluidized bed
# Use the largest pipe that will fit between the branch lines (but not between the backwash branch lines)
ND_FiSandOutlet := LookupFloor(B_FiManifoldBranch - outerdiameter(ND_FiManBranch), AvailOD, AvailND) = 0.0508 m
Q_FiSandOutletStart := Q_pipetotal(innerdiameter(ND_FiSandOutlet, PS_Default), HL_FiSandOutletStart, H_FiSandOutlet, Nu_Water*Rho_H2O/Rho_FiFluidized, E_Pvc, K_PipeExit + K_PipeEnt + 2*K_El90)
Q_FiSandOutletFinish := Q_pipetotal(innerdiameter(ND_FiSandOutlet, PS_Default), HL_FiSandOutletFinish, H_FiSandOutlet, Nu_Water*Rho_H2O/Rho_FiFluidized, E_Pvc, K_PipeExit + K_PipeEnt + 2*K_El90)
Q_FiSandOutlet := (Q_FiSandOutletStart + Q_FiSandOutletFinish)/2  # This isn't quite right, but it is close.
Ti_FiSand := V_FiSand/Q_FiSandOutlet  # This is the time required to empty the filter of the sand.
Ti_FiSandDrum := 220 L/Q_FiSandOutlet
Q_FiSandOutletFinish/(innerdiameter(ND_FiSandOutlet, PS_Default)^2/4*π) =  # error  # The velocity in the pipe is far greater than the backwash velocity
# Estimate of the flow rate that would allow sand to settle within the vertical pipe. This flow rate is really low and so the valve will need to be almost closed before the sand stops flowing.
Q_Settle := 5*mm/s*(innerdiameter(ND_FiSandOutlet, PS_Default)^2/4*π) = 0.0119632 L/s
