# Tutorial of Coagulant and Clay System Design for Coiled Flocculator
# [reference: Fractalflocmodel.xmcd]
# tubing code  ID (mm)  ml/rev
# Variable | : is the variable should be defined
# Design | : is the design that can be used to run your experiment
Result
# : is the result that is helpful for you to have a better understanding of your experiment
Comment
# : is the comment that indicates the constraint for this design
TubingData := [13, 0.8, 0.06; 14, 1.6, 0.21; 16, 3, 0.8; 17, 6.3, 2.8; 18, 8, 3.8]
Comment
# : is the comment that indicates the variable which you can play with to achieve the constraint
R_Pump := 1.92 cm  # This pump rotor radius was set based on minimizing the error between predicted and measured values. This is for the 3 roller pump heads.
1.62*80/72 = 1.8
# This corrects for the fact that larger diameter tubing has more loss due to the space smashed by the rollers. I'm actually not quite sure what this mechanism is...This was set based on minimizing the error between predicted and measured values.
k_Nonlinear := 5.45
# The vectorization is needed if an array is passed to this function
# The function below returns the flow per revolution given the ID of the 3-stop tubing. This function returns values that are very close to the table produced by ismatec.
Q3roller_TubePerRevCalc(ID_Tube) := vectorize(((R_Pump*π*2 - k_Nonlinear*ID_Tube)/rev)*ID_Tube^2/4*π)
# In the lab we currently have orange-yellow, yellow-blue, and purple-white tubing
Tube_Code := TubingData[:, 0]
ID_TubeArray := TubingData[:, 1]*mm
Q_TubePerRev := TubingData[:, 2]*mL/rev
# Determining Q.floc:
Q_Plant := 1*L/s
# Mixing
ID_TubeArray = [0.8; 1.6; 3; 6.3; 8] mm
# Clay
NTU = 1.7 mgm/L
C_Clay := 100*NTU  # Turbidity (NTU) of the expected influent
# The concentration of clay in the mixed water in the flocculator.
MinRPM := 3*rev/min
# This is for a 100 rpm pump and is designed to get the pump operating at an rpm where it has good speed control and it has the ability to be adjusted up or down as needed. Some of our pumps have a minimum speed of about 2.3 rpm.
MaxRPM := 95*rev/min
ClayTubingCode := 16
Q3roller_TubePerRevCalc(ID_TubeArray[match(13, Tube_Code)[0]])*100*rpm = 5.84473 mL/min
ID_ClayTubing := ID_TubeArray[match(ClayTubingCode, Tube_Code)[0]] = 3 mm
ClayStockMaxEmpirical := 300*gm/L
C_ClayStockMax := C_Clay*Q_Plant/(Q3roller_TubePerRevCalc(ID_ClayTubing)*MinRPM) = 4612.28 gm/L
C_ClayStockMin := C_Clay*Q_Plant/(Q3roller_TubePerRevCalc(ID_ClayTubing)*MaxRPM) = 145.651 gm/L
# Clay stock concentrations of up to 300 g/L have been tested and are able to be pumped. If this minimum stock concentration exceeds the maximum allowable clay stock concentration, then reduce the tubing size.
C_ClayStock := min(C_ClayStockMax, ClayStockMaxEmpirical) = 300 gm/L
# The function below just rounds the stock concentration.
# The concentration of clay in the stock bottle. You can change this to make sure the designed velocity for the clay pump is within the range of velocity of the pump.
C_PAClStock := Floor(min(C_ClayStockMax, ClayStockMaxEmpirical)/(10^(floor(log(min(C_ClayStockMax, ClayStockMaxEmpirical)/(gm/L))) - 1)*(gm/L)), 1)*10^(floor(log(min(C_ClayStockMax, ClayStockMaxEmpirical)/(gm/L))) - 1)*gm/L = 300 gm/L
V_ClayStock := 5 L  # The volume of container which holds clay suspension.
M_stockclay := C_ClayStock*V_ClayStock = 1500 gm  # The mass of clay that we need to add into the stock container
Q_ClayStock := C_Clay*Q_Plant/C_ClayStock = 0.566667 mL/s
# Flow rate of clay suspension that needed
T_ClayStock := V_ClayStock/Q_ClayStock = 2.45098 hr  # The time at which the clay  suspension in the container would run out.
# PACl
C_SuperStockPACl := 69.4*gm/L  # Concentration of Aluminum in the laboratory PACl stock (Confirm that this matches the stock concentration you are using.)
C_PAClMin := 0.2*mg/L  # The minimum dose of PACl of the mixed water in the flocculator.
C_PAClMax := 2*mg/L  # The maximum dose of PACl of the mixed water in the flocculator.
PAClTubingCode := 13
ID_PAClTubing := ID_TubeArray[match(PAClTubingCode, Tube_Code)[0]] = 0.8 mm
C_PAClStockMax := C_PAClMin*Q_Plant/(Q3roller_TubePerRevCalc(ID_PAClTubing)*MinRPM) = 68.4378 gm/L
log(C_PAClStockMax/(gm/L)) = 1.8353
C_PAClStockMin := C_PAClMax*Q_Plant/(Q3roller_TubePerRevCalc(ID_PAClTubing)*MaxRPM) = 21.6119 gm/L
floor(log(C_PAClStockMax/(gm/L))) - 1 = 0
# This term figures out which digit to round to.
C_PAClStock := Floor(min(C_PAClStockMax, C_SuperStockPACl)/(10^(floor(log(min(C_PAClStockMax, C_SuperStockPACl)/(gm/L))) - 1)*(gm/L)), 1)*10^(floor(log(min(C_PAClStockMax, C_SuperStockPACl)/(gm/L))) - 1)*gm/L = 68 gm/L
10^(floor(log(C_PAClStockMax/(gm/L))) - 1) = 1
V_PAClBottle := 1 L  # The volume of container which holds coagulant.
# The volume of the PACl super stock that must be diluted to the volume of the PAClBottle.
V_PAClSuperStock := V_PAClBottle*C_PAClStock/C_SuperStockPACl = 979.827 mL
Q_PAClMax := C_PAClMax*Q_Plant/C_PAClStock = 0.0294118 mL/s  # Flow rate of coagulant solution that is needed
t_PACl := V_PAClBottle/Q_PAClMax = 0.393519 day  # The time after which the coagulant in the container  would be run out.
# Water
Q_water := Q_Plant - Q_ClayStock - Q_PAClMax = 999.404 mL/s
# Flow rate of water needed directly from the tap. This can be calculated in ProCoDA using the external function for subtract.
