# Tutorial of Coagulant and Clay System Design for Coiled Flocculator
# http://www.ismatec.com/int_e/tubing/3-stop/3_stoptubing.htm
# http://www.ismatec.com/int_e/pumps/t_mini_s_ms_ca/tubing_msca2.htm
# Below is data from the ismatec table.
# [reference: Fractalflocmodel.xmcd]
# tubing code  ID (mm)  ml/rev
# Variable | : is the variable should be defined
# Design | : is the design that can be used to run your experiment
Result
# : is the result that is helpful for you to have a better understanding of your experiment
Comment
# : is the comment that indicates the constraint for this design
Comment
# : is the comment that indicates the variable which you can play with to achieve the constraint
R_Pump := 1.62 cm  # This pump rotor radius was set based on minimizing the error between predicted and measured values. This is for the 6 roller pump heads.
TubingData := [
    "orange-black", 0.13, 0.001383333;
    "orange-red", 0.19, 0.002833333;
    "orange-blue", 0.25, 0.004833333;
    "orange-green", 0.38, 0.010833333;
    "green-yellow", 0.44, 0.014333333;
    "orange-yellow", 0.51, 0.02;
    "white-yellow", 0.57, 0.023333333;
    "orange-white", 0.64, 0.03;
    "black-black", 0.76, 0.041666667;
    "orange-orange", 0.89, 0.056666667;
    "white-black", 0.95, 0.063333333;
    "white-white", 1.02, 0.073333333;
    "white-red", 1.09, 0.083333333;
    "red-red", 1.14, 0.09;
    "red-grey", 1.22, 0.101666667;
    "grey-grey", 1.3, 0.115;
    "yellow-yellow", 1.42, 0.133333333;
    "yellow-blue", 1.52, 0.151666667;
    "blue-blue", 1.65, 0.166666667;
    "blue-green", 1.75, 0.183333333;
    "green-green", 1.85, 0.216666667;
    "purple-purple", 2.06, 0.25;
    "purple-black", 2.29, 0.283333333;
    "purple-orange", 2.54, 0.333333333;
    "purple-orange", 2.62, 0.366666667;
    "purple-white", 2.79, 0.401;
    "black-white", 3.17, 0.433333333
]
# This corrects for the fact that larger diameter tubing has more loss due to the space smashed by the rollers. I'm actually not quite sure what this mechanism is...This was set based on minimizing the error between predicted and measured values.
k_Nonlinear := 13
# The vectorization is needed if an array is passed to this function
# The function below returns the flow per revolution given the ID of the 3-stop tubing. This function returns values that are very close to the table produced by ismatec.
Q6roller_TubePerRevCalc(ID_Tube) := vectorize(((R_Pump*π*2 - k_Nonlinear*ID_Tube)/rev)*ID_Tube^2/4*π)
# In the lab we currently have orange-yellow, yellow-blue, and purple-white tubing
Tube_Code := TubingData[:, 0]
ID_TubeArray := TubingData[:, 1]*mm
Q_TubePerRev := TubingData[:, 2]*mL/rev
# Determining Q.floc:
Q_Plant := 7*mL/s
# Mixing
ID_TubeArray = [0.13; 0.19; 0.25; 0.38; 0.44; 0.51; 0.57; 0.64; 0.76; 0.89; 0.95; 1.02; 1.09; 1.14; 1.22; 1.3; 1.42; 1.52; 1.65; 1.75; 1.85; 2.06; 2.29; 2.54; 2.62; 2.79; 3.17] mm
# Clay
NTU = 1.7 mgm/L
C_Clay := 100*NTU  # Turbidity (NTU) of the expected influent
# The concentration of clay in the mixed water in the flocculator.
MinRPM := 3*rev/min
# This is for a 100 rpm pump and is designed to get the pump operating at an rpm where it has good speed control and it has the ability to be adjusted up or down as needed. Some of our pumps have a minimum speed of about 2.3 rpm.
MaxRPM := 95*rev/min
ClayTubingColors := "yellow-blue"  # yellow blue tubing
ID_ClayTubing := ID_TubeArray[match(ClayTubingColors, Tube_Code)[0]] = 1.52 mm
C_ClayStockMax := C_Clay*Q_Plant/(Q6roller_TubePerRevCalc(ID_ClayTubing)*MinRPM) = 159.897 gm/L
ClayStockMaxEmpirical := 300*gm/L
C_ClayStockMin := C_Clay*Q_Plant/(Q6roller_TubePerRevCalc(ID_ClayTubing)*MaxRPM) = 5.04937 gm/L
# Clay stock concentrations of up to 300 g/L have been tested and are able to be pumped.
C_ClayStock := Floor(min(C_ClayStockMax, ClayStockMaxEmpirical)/(10^(floor(log(min(C_ClayStockMax, ClayStockMaxEmpirical)/(gm/L))) - 1)*(gm/L)), 1)*10^(floor(log(min(C_ClayStockMax, ClayStockMaxEmpirical)/(gm/L))) - 1)*gm/L = 150 gm/L
# The concentration of clay in the stock bottle. You can change this to make sure the designed velocity for the clay pump is within the range of velocity of the pump.
V_ClayStock := 1 L  # The volume of container which holds clay suspension.
M_stockclay := C_ClayStock*V_ClayStock = 150 gm  # The mass of clay that we need to add into the stock container
Q_ClayStock := C_Clay*Q_Plant/C_ClayStock = 0.00793333 mL/s
# Flow rate of clay suspension that needed
T_ClayStock := V_ClayStock/Q_ClayStock = 35.014 hr  # The time at which the clay  suspension in the container would run out.
# PACl
C_SuperStockPACl := 69.4*gm/L  # Concentration of Aluminum in the laboratory PACl stock (Confirm that this matches the stock concentration you are using.)
C_PAClMin := 0.2*mg/L  # The minimum dose of PACl of the mixed water in the flocculator.
C_PAClMax := 2*mg/L  # The maximum dose of PACl of the mixed water in the flocculator.
PAClTubingColors := "orange-yellow"
ID_PAClTubing := ID_TubeArray[match(PAClTubingColors, Tube_Code)[0]] = 0.51 mm
C_PAClStockMax := C_PAClMin*Q_Plant/(Q6roller_TubePerRevCalc(ID_PAClTubing)*MinRPM) = 1.4404 gm/L
log(C_PAClStockMax/(gm/L)) = 0.158484
C_PAClStockMin := C_PAClMax*Q_Plant/(Q6roller_TubePerRevCalc(ID_PAClTubing)*MaxRPM) = 0.454864 gm/L
floor(log(C_PAClStockMax/(gm/L))) - 1 = -1
# This term figures out which digit to round to.
C_PAClStock := Floor(min(C_PAClStockMax, C_SuperStockPACl)/(10^(floor(log(min(C_PAClStockMax, C_SuperStockPACl)/(gm/L))) - 1)*(gm/L)), 1)*10^(floor(log(min(C_PAClStockMax, C_SuperStockPACl)/(gm/L))) - 1)*gm/L = 1.4 gm/L
10^(floor(log(C_PAClStockMax/(gm/L))) - 1) = 0.1
V_PAClBottle := 1 L  # The volume of container which holds coagulant.
# The volume of the PACl super stock that must be diluted to the volume of the PAClBottle.
V_PAClSuperStock := V_PAClBottle*C_PAClStock/C_SuperStockPACl = 20.1729 mL
Q_PAClMax := C_PAClMax*Q_Plant/C_PAClStock = 0.01 mL/s  # Flow rate of coagulant solution that is needed
t_PACl := V_PAClBottle/Q_PAClMax = 1.15741 day  # The time after which the coagulant in the container  would be run out.
# Water
Q_water := Q_Plant - Q_ClayStock - Q_PAClMax = 418.924 mL/min
# Flow rate of water needed directly from the tap. This can be calculated in ProCoDA using the external function for subtract.
# RPM calculation
