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# *  maximum flow=400 L/min
# * minimum flow (corresponding to height of rectangular weir) = 40 L/min
# * linear proportionality = 20 L/min/cm
#
# 1. Write functions in MathCAD that design all the geometry of the Sutro weir given these constraints. The functions must have the parameters that could potentially be varied as inputs.
# 2. Create a graph in MathCAD that draws the shape of the Sutro weir (including the rectangular portion).
# 3. Use the graph formatting options to hide the arguments and to add appropriate x and y axis labels. Change the display units to cm (by dividing the arguments by cm) and include the units in the labels.
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Q_max := 12*L/s
H_dmax := 20 cm
C_d := 0.62
Π_Sutro := 0.1
Q_min := Q_max*Π_Sutro
C_linear := Q_max/H_dmax = 36 L/(min*cm)
W(Q_max, H_dmax) := Q_max/(H_dmax^(3/2)*C_d*sqrt(3*g*Π_Sutro))
W(Q_max, H_dmax) = 4.96695 in
s_Sutro := 3/2*Π_Sutro*H_dmax = 3 cm
y(x, H_dmax) :=
    1/(2*H_dmax^(3/2)*C_d*sqrt(3*g*Π_Sutro))*(1 - 2/π*atan(sqrt(x/s_Sutro))) if x > 0
    1/(2*H_dmax^(3/2)*C_d*sqrt(3*g*Π_Sutro)) otherwise  # Need to multiply this y by Q to get actual y
x := -s_Sutro, 0.1 cm - s_Sutro .. H_dmax - 2/3*s_Sutro
H_d(x) := x + 2/3*s_Sutro
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# What fraction of the total flow goes throught the rectangular portion of the Sutro weir at the maximum design flow rate?
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Q_base := 2/3*C_d*W(Q_max, H_dmax)*sqrt(2*g)*((H_dmax + 1/3*s_Sutro)^(3/2) - (H_dmax - 2/3*s_Sutro)^(3/2))
Q_base = 275.279 L/min
Q_baseratio := Q_base/Q_max = 0.382332
2/3*1/(H_dmax^(3/2)*sqrt(Π_Sutro))*((H_dmax + 1/3*s_Sutro)^(3/2) - (H_dmax - 2/3*s_Sutro)^(3/2)) = 0.468259
# How could we estimate the maximum flowrate for a Sutro Weir installed in a pipe?
# The weir will begin to fail if the water isn't experiencing free fall (or when the weir isn't discharging into air).
#
# We need to calculate the average vertical velocity at the base of the Sutro Weir.
# Take the total flow rate and divide by the average velocity to get the minimum pipe cross sectional area.
Q_max/(H_dmax^(3/2)*C_d*sqrt(2*g*Π_Sutro))
h := H_dmax - 2/3*s_Sutro
ρ := 1000*kg/m^3
# vertical velocity of the water from any height when it reaches the bottom of the weir
sqrt(2*g*(x + s_Sutro))
sqrt(2*g*(h - x))  # velocity through the weir in the vena contracta
M_in := 2*g*ρ*integral(sqrt((x + s_Sutro)*(h - x))*C_d*2*y(x, H_dmax), x = -s_Sutro .. h)
C_d*2*y(x, Q_max, H_dmax)*dx  # is the effective area of a differential weir element as a function of height given the effect of the vena contracta
# Need to multiply M.in by Q.max to get actual momentum
M_in = 976.295 kg/(m^2*s)
Π_SutroSafety := 1.5  # Add factor of safety of 2
V_out := M_in/(ρ*Π_SutroSafety)
V_out = 0.650863 m/s
A_pipemin(Q_max) := Q_max/V_out
d_pipemin(Q_max) := sqrt(4*A_pipemin(Q_max)/π)
d_pipemin(12*L/s) = 6.03208 in
Q := 100*L/min, 200*L/min .. 10000*L/min
Q_plants := [100; 1000]*L/min
D_plants := [3; 8]*in
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K_elbows := 3
h_e(Q_max) := K_elbows*V_out(Q_max)^2/(2*g)  # error: This value must be a function, but has the form: Length · Time^-1.
h_e(Q_max) =  # error: This variable is undefined.
# The design constraint of preventing flooding of the Sutro Weir dominates the problem.
d_pipemin(13*L/s) = 6.27839 in
