## Backwash Lagoon Design Challenge
## Design Team SPR 16: Cinthia Kim
# Backwash lagoons will be designed to conserve and reuse backwash water during low flow or dry seasons in Honduras. A lagoon will be designed to be below the drain channel. Asuming the backwash dimensions to be based per cycle.
#
# 1st Consultation with Jon and Walker Grimshaw.
#
# It is always a bit difficult to get this information since the operators do not report this data in their text messages and due to clogging issues in the filters, it has been difficult to determine a set cycle time between backwashes. For example, after filter cleaning in Támara, the filter cycles are between 12 and 15 hours. After a few months, the cycle are less than 5 hours, always operating at design capacity. Luckily, the backwash frequency changes little when the raw water turbidity changes since the turbidity of water leaving the sedimentation tanks is much more constant. Here is some general information on the current status of filters and backwash intervals at different plants.
#
# San Nicolás has two filters, one of which currently has issues and so the entrance box overflows after about an hour to an hour and a half. The other filter operates much better and lasts around 24 hours. They operate their plant at 25 L/s and the design capacity is 32 L/s.
#
# Jesus de Otoro also has two filters that last around 10 hours between backwash currently. They operate their plant between 16 and 20 liters per second with the design capacity of the plant 20 L/s.
#
# Morocelí has cycle times between 8 and 11 hours operating at around 11 L/s, with a design capacity of 16 L/s. Very shortly they'll be treating a bit more water and we will see how long the cycles last then.
#
# San Matías has recorded this data most closely, but they operate so far below the design capacity of the filter that their run times are not accurate for a filter operating at design capacity.
# Notes and Observations
#
# - The backwash lagoon will have to have a clay layer or an alternate layer to diminish leeching into the soil under the lagoon.
# - Some considerations include whether the pump should be regulary running during non-dry seasons as well. If the pump will be operated, what type of pump and how often and when should it be operated.
# - If the pump is operated only during dry season, how will the backwash water collected in the lagoon be treated? Will the water be let to overflow?
# - How do you construct a barrier between the clay layer and the sediment collected to ensure protection of the soil and good cleanup of the sludge?
# - Will there be different layers within the lagoon? [Active storage, dead storage, flood storage]
# 2nd Consultation with Jon and Walker
#
# Firstly, Zamorano has decided to not construct the backwash lagoons at the present time due to budget constraints. This is fairly discouraging for the implementation of sludge treatment at other plants since they generally have fewer resources in terms of both land area and funding than Zamorano. However, here are some more specific responses to your questions:
#
# 1) Two different treatment schemes were designed for Zamorano.
#
# Option 1 was a secondary clarifier (another sedimentation tank) from which low turbidity water could be decanted into receiving bodies of water and concentrated sludge would be released onto four drying patios on a rotating basis of 4.5 days. If recycling water, this water would be pumped from the secondary clarifier to the entrance tank. As the clarifier fills with sludge during each 4.5 day interval, the clear water is decanted immediately before each backwash. The drying patios would receive sludge of 40 cm depth that would percolate and dry over a period of 18 days before being shoveled out and taken to a landfill. The 40cm sludge depth is a standard used in the design of such drying patios and the length of the sludge drying period and thus size of the drying patios and clarifier were calculated from the attached documents and test columns made by Jon at the Moroceli plant. The parameters used for the Zamorano design were Q.SedSludge=60mL/s, Q.FilterSludge=400mL/s and the settleable solids fraction for the sed sludge and filter sludge are 70% and 1% respectively.
#
# Option 2 was two larger sludge lagoons, one in active use while the other dries, designed proportionally to the sludge lagoons for the Cornell Water Filtration Plant, estimated as 20m x 50m x 4ft deep. Scaling this with respect to the total sludge flow from the Zamorano plant of 20L/s and the backwash flow per day at the CUWFP, each lagoon is approximately 255 cubic meters in volume.
#
# 2) I don't think I fully understand this question. Both options would have a border extending upwards so as to not fill with water when it rains, but I don't think this is what you are asking.
#
# 3) The drying patios have bricks as the top layer and the secondary clarifier is made of concrete, so both of those would easily separate sludge and infrastructure. The lagoons would however just be a dirt bottom. and when emptied would be emptied by a backhoe.
#
# 4) The drying pads would be emptied by hand/shovel, but the lagoons would need a backhoe that could possibly damage the foundation. You would have to ask Chris Bordlemay if they have a different strategy to not damage the foundation apart from simply knowing the depth of the lagoon.
#
# 5) The systems proposed to Zamorano did not include sludge recycle, but yes they would need to pump water from the lagoons or secondary clarifier back to the plant entrance tank. The water sources of Zamorano still have substantial flow during the dry season, so any sludge recycle would have been used year round, more to save money on coagulant and increase flocculation efficiency than to conserve water.
#
# 6) These "treatment" strategies are really just to concentrate and dewater the sludge. The dirty water in all scenarios would just be released to another body of water. In Zamorano, they planned to landfill the sludge, but in some cases it is used as an agricultural amendment.
# For the AWWA Sizing residuals packet, how did the author
# obtain the values for tables 5-7 on page 102. What region and
# other specifications important to the Area calculation are
# further needed to make better customable design parameters
# and decisions.
# Option 1 can be a little mroe costly.
# Whereas, option 2 might require a lot of land.
# But seriously, how mcuh are the secondary clarifiers?
# How much are the lagoons?
# Interesting how there are no clay bottoms. Maybe ask Chris
# for how his lagoons are structured.
# Ask Chris Bordlermay for more information on lagoons.
# The sludge recycle would be more beneficial to saving money
# on coagulant and increasing flocculation efficiency ranther than
# to conserve water. Interesting point!
# What direction should I take?
# Create a detailed progress for the rest of the semester.
# Research report due Friday so build up on that.
## DC Filtration 15 Solution
# For an example, assume stacked rapid sand filter using the sample inputs in the EtFlocSedFi folder.
# [reference: SampleInputs.xmcd]
# [reference: EtFlocSedFi.xmcd]
Z_Walkway = 1.28358 m
Z_PlantLowerDCBottom - Fi_origin[2] = 1.75786 m
# 1)  Calculate the total sand depth.
H_Fi = 4.72569 m
# 3)  What is the filter bed plan view area for Tamara?
A_Fi := Q_Plant/V_FiBw = 3.63636 m^2
# 7)  What is the residence time in the fluidized bed during backwash? You may assume the expansion ratio is 1.3.
Π_FiBwExpansion := 1.3
θ_FiBw := (ε_FiSand*H_Fi + (Π_FiBwExpansion - 1)*H_Fi)/V_FiBw = 300.726 s
# 8)  Our next goal is to determine what fraction of the water is wasted due to backwash in a SRSF. Given that the backwash water that ends up above the filter bed never returns to the filter it isn't necessary to completely clear the water above the filter bed during a backwash cycle. Therefore we anticipate that backwash can be ended after approximately 3 expanded bed residence times. In addition it takes about 1 minute to initiate backwash by lowering the water level above the filter bed. Estimate the time between beginning backwash and finishing the cleaning of the bed.
Ti_FiBwDrain := 1 min
Ti_FiBw := θ_FiBw*3 + Ti_FiBwDrain = 962.178 s
# 9)  Estimate the total depth of water that is wasted during that time.
L_FiBw := V_FiBw*Ti_FiBw = 10.584 m
# 10)  Estimate the total depth of water that is lost due to refilling the filter box at the end of backwash plus the slow refilling to the maximum dirty bed height. You may ignore the influence of plumbing head loss and you may assume that the dirty bed head loss is about 40 cm.
L_FiBwRefill := H_Fi + 20 cm + HL_FiDirty = 5.32569 m
# 11)  Now calculate the total length (or depth) of water that is wasted due to backwash by adding the two previous lengths.
L_FiBwWasted := L_FiBw + L_FiBwRefill = 15.9096 m
# This length when multiplied by the area of the filter would give the total volume of water wasted due to backwash.
V_FiBwWasted := A_Fi*L_FiBwWasted = 57853.3 L
# If we assume the lagoon to hold n number of backwash cycles, we would need the volume of the lagoon to be:
n := □  # error: This placeholder is empty.
V_BwLagoon := n*V_FiBwWasted  # error: This variable is undefined.
