# [reference: EtFlocSedFi.xmcd]
# [reference: Flocculator.xmcd]
# Baffle Matrix:
N_Baffles := [N_FlocBaffleLowerTotal; N_FlocBaffleUpperTotal]
Baffles := [L_FlocBaffleLower, W_FlocBaffle; L_FlocBaffleUpper, W_FlocBaffle]
W_CommBaffle := 1.07 m
Price := 4.05*USD/ft
L_AvailableBaffles := [8/3.281; 10/3.281; 12/3.281; 14/3.281; 16/3.281; 18/3.281; 20/3.281]
# Baffle Optimization Functions:
Waste(length) := L_AvailableBaffles/length - floor(L_AvailableBaffles/length)
Index(Waste) :=
    i ← 0
    for i ∈ 0 .. 6
        i if Waste[i] ≤ min(Waste)
N_WidthCuts(Wneeded, Wcomm) :=
    2 if Wneeded ≤ Wcomm/2
    1 otherwise
N_BaffleInCommercialBaffle(length, Waste) := floor(L_AvailableBaffles[Index(Waste)]/length)
N_TotalBaffles(Nbaffles, Lcuts, Wcuts) := ceil(Nbaffles/(Lcuts*Wcuts))
BaffleSize(Index) := L_AvailableBaffles[Index]*3.281*ft
BaffleCost(n, size, price) := n*size*price
# Lower Baffles:
L_FlocBaffleLowerUnitless := L_FlocBaffleLower/m = 1.45704
Waste(L_FlocBaffleLowerUnitless)
WasteLowerBaffles := Waste(L_FlocBaffleLowerUnitless)
Index(WasteLowerBaffles) = 1
N_CommercialBaffles := N_FlocBaffleLowerTotal
N_BaffleInCommercialBaffle(L_FlocBaffleLowerUnitless, WasteLowerBaffles) = 2
N_LFlocBaffleLowerCuts := N_BaffleInCommercialBaffle(L_FlocBaffleLowerUnitless, WasteLowerBaffles)
N_WidthCuts(W_FlocBaffle, W_CommBaffle) = 2
N_WFlocBaffleLowerCuts := N_WidthCuts(W_FlocBaffle, W_CommBaffle)
N_TotalBaffles(N_FlocBaffleLowerTotal, N_LFlocBaffleLowerCuts, N_WFlocBaffleLowerCuts) = 7
N_LowerCommBaffles := N_TotalBaffles(N_FlocBaffleLowerTotal, N_LFlocBaffleLowerCuts, N_WFlocBaffleLowerCuts)
BaffleCost(N_CommBaffles(N_TotalLowerBaffles), BaffleSize(Index(TotalWasteLowerBaffles)), Price)
Cost_LowerBaffles := BaffleCost(N_LowerCommBaffles, BaffleSize(Index(WasteLowerBaffles)), Price)
N_LowerCommBaffles = 7
BaffleSize(Index(WasteLowerBaffles)) = 10 ft
Cost_LowerBaffles = 283.5 USD
# Upper Baffles
L_FlocBaffleUpperUnitless := L_FlocBaffleUpper/m = 1.70355
Waste(L_FlocBaffleUpperUnitless)
WasteUpperBaffles := Waste(L_FlocBaffleUpperUnitless)
Index(WasteUpperBaffles) = 2
N_BaffleInCommercialBaffle(L_FlocBaffleUpperUnitless, WasteUpperBaffles) = 2
N_LFlocBaffleUpperCuts := N_BaffleInCommercialBaffle(L_FlocBaffleUpperUnitless, WasteUpperBaffles)
N_WidthCuts(W_FlocBaffle, W_CommBaffle) = 2
N_WFlocBaffleUpperCuts := N_WidthCuts(W_FlocBaffle, W_CommBaffle)
N_TotalBaffles(N_FlocBaffleLowerTotal, N_LFlocBaffleLowerCuts, N_WFlocBaffleLowerCuts)
N_TotalUpperBaffles := N_TotalBaffles(N_FlocBaffleLowerTotal, N_LFlocBaffleLowerCuts, N_WFlocBaffleLowerCuts)
BaffleCost(N_TotalUpperBaffles, BaffleSize(Index(TotalWasteUpperBaffles)), Price)
Cost_UpperBaffles := BaffleCost(N_TotalUpperBaffles, BaffleSize(Index(WasteUpperBaffles)), Price)
N_TotalUpperBaffles = 7
BaffleSize(Index(WasteUpperBaffles)) = 12 ft
Cost_UpperBaffles = 340.2 USD
TotalCost_FlocculatorBaffles := Cost_LowerBaffles + Cost_UpperBaffles
TotalCost_FlocculatorBaffles = 623.7 USD
L_SedPlate = 0.5 m
N_SedPlates = 204
