# Created by Julia Morris
# Updated by Dhaval Mehta, dm525, 6/5/2014
Q_Plant := 0.8*L/s
# Low Flow Stacked Rapid Sand Filter
# [reference: ExpertInputs.xmcd]
# [reference: MathFunctions.xmcd]
# [reference: PipeDatabase.xmcd]
# [reference: MaterialsDatabase.xmcd]
# [reference: FluidsFunctions.xmcd]
# Dimensions and Pipe Sizes
L_FiBodyPipe := 6 ft
H_FiCap := 3/8*in
S_FiInletMan := 40 cm
ND_FiPipe := 12 in
PS_Fi := 2  # (Schedule 40)
ND_FiManPipe := 2 in  # Piping bringing water to each filter from entrance tank/taking water to exit tanks
N_FiInletPipes := 4
N_FiOutletPipes := 3
T_FiLayer := 20 cm
N_FiManBranch := 4  # number of branches on either side
PS_FiBranch := PS_Fi
ND_FiManTrunk := 1 in  # Diameter of Filtration trunks. Note that diameter of backwash trunk is calculated in code
L_FiManCoupling := 2.094 in
# Length of the coupling connecting manifold trunks to filter body. PipeFunctions uses schedule 80, which is why it cannot be used. Thus, this value is user defined (taken from McMaster-carr for sched 40)
# The length of the coupling connecting the backwash trunk to the body is INPUT in the section titled 'Number of Filters, Flow Rate Calculations and Backwash Trunk Diameter.
ND_FiManBranch := .5 in
# Diameter of Branches on filtration and backwash trunks
ND_FiBwManBranch := 0.5 in
ND_FiSandOutlet := 1 in  # Diameter of Sand Drain
ND_BallValve := 2 in
ND_BedTester := 1/2*in
ND_BedTesterOuter := 1 in
H_FiManCap := CapHeight(ND_FiManTrunk)/2
Pi_CapHeight := 0.75  # Portion of (non-domed) portion of cap left after sawing off ends
D_FiTopRingOuter := 14 in
Dist_CentToRodTop := 6.6739 in
Dist_CentToStuds := 5.6525 in
D_FiTopRingInner := 10 in
D_FiRodHoles := 5/16*in
L_FiBallValve := .1625 m
L_FiOuterBulkFitting := .0368 m
# Layer Thickness as Function of Trunk Diameter
# round up to the nearest cm to make construction easier
H_FiLayerF(ND_Trunk) := max(H_FiLayerMin, Ceil(outerdiameter(ND_Trunk) + S_FiTrunkMin, 1 cm), Ceil(OuterDiameterFittingPVC(ND_Trunk), 1 cm), Ceil(FerncoOuterDiameter(ND_Trunk), 1 cm))
H_FiBottomLayerF(ND_Trunk, ND_BwTrunk) := max(H_FiLayerMin, Ceil(outerradius(ND_Trunk) + outerradius(ND_BwTrunk) + S_FiTrunkMin, 1 cm), Ceil(ConRadius(ND_Trunk) + ConRadius(ND_BwTrunk), 1 cm), Ceil(FerncoOuterDiameter(ND_Trunk)/2 + FerncoOuterDiameter(ND_BwTrunk)/2, 1 cm))
# Flow Distribution Constraints: Ratio of Pressure Recovery to Clean Bed Head Loss
# There are three flow distribution problems in the filter design: distribution between the slots along a manifold branch, distribution between branches along a trunk, and distribution between filter layers. The first two are both addressed by making pressure recovery in the manifold (both trunks and branches) small relative to the short path head loss (head loss through the clean bed, since slot head loss in forward filtration is small). In backwash mode where there is no bed head loss, the pressure recovery in the manifold plumbing must be small relative to slot head loss.
#
# Head loss through the inlet and outlet plumbing differs for different layers both because the number of elbows varies and because the top and bottom inlets have 1/2 the flow of the middle two. Therefore good flow distribution between layers would be addressed by making head loss through the inlet and outlet plumbing small for all layers relative to clean bed head loss. We do not have an explicit constraint set for this, but the constraint on trunk diameter which gives good flow distribution within the manifolds seems to be sufficient to take care of it. As a check, see the analysis under the section "Path Head Loss Calculations and Flow Distribution Between Layers" below.
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Pi_FiManifoldQ := 0.85  # Ratio of long path flow to short path flow
Pi_FiManifoldHeadLoss := 1 - Pi_FiManifoldQ^2 = 0.2775
# Ratio of pressure recovery in the slotted pipes to the head loss through the clean bed (or through the slots in backwash mode)
# Even though the piezometric head profiles for the inlet and outlet manifolds on the middle layers may be parallel meaning that pressure recovery there need not be small for good distribution between sand bed flow paths, we still need pressure recovery to be small in the outlet manifolds in order to get good flow distribution in the top and bottom layers where the velocity in the manifolds is 1/2 and the pressure recovery 1/4 that of other layers (even smaller in the larger-diameter bottom manifold where velocity head is tiny).
# Number of Filters, Trunk Diameter and Layer Thickness Based on Flow Distribution Constraint
Q_FilterMax :=
    H_FiLayer ← T_FiLayer
    HL_FiCleanLayer ← h_lKozeny(H_FiLayer, D_FiSand60, V_FiLayer, ε_FiSand, Nu_Water)
    V_FiTrunkMaxPR ← sqrt(2*g*HL_FiCleanLayer*Pi_FiManifoldHeadLoss)
    Q_FilterMax ← π*innerdiameter(ND_FiManTrunk, PS_Default)^2/4*V_FiTrunkMaxPR*N_FiLayer/2
    return Q_FilterMax
# This function returns the maximum flow rate through a filter for each of the available trunk pipe sizes based on the manifold flow distribution constraint.
Q_FilterMax = 1.15473 L/s  # Q.FilterMax using equations used to find max flow rate in SRSF
Q_LFFilterMax := 0.8*L/s  # Optimal flow rate found by experimentation
N_Fi := ceil(Q_Plant/Q_LFFilterMax) = 1
H_FiLayer := H_FiLayerF(ND_FiManTrunk) = 20 cm
# Clean Bed Head Loss and Maximum Manifold Velocity
# Filtration manifold maximum velocity
HL_FiCleanLayer := h_lKozeny(H_FiLayer, D_FiSand60, V_FiLayer, ε_FiSand, Nu_Water) = 5.56209 cm
PR_FiManifoldMax := HL_FiCleanLayer*Pi_FiManifoldHeadLoss = 1.54348 cm
V_FiManMaxPR := sqrt(2*g*PR_FiManifoldMax) = 0.550207 m/s
# Backwash manifold maximum velocity
HL_FiBwSlotsEst := 5 cm
PR_FiBwManifoldMax := HL_FiBwSlotsEst*Pi_FiManifoldHeadLoss
V_FiBwManMaxPR := sqrt(2*g*PR_FiBwManifoldMax) = 0.521665 m/s
# Number of Filters, Flow Rate Calculations, and Backwash Trunk Diameter
Q_Fi := Q_Plant/N_Fi = 0.8 L/s  # The flow will be divided evenly between the N_Fi = 1 filters.
A_FiActive := Q_Fi/(N_FiLayer*V_FiLayer) = 0.0727273 m^2  # This is the required area of each of the N_Fi = 1 filters.
Q_FiLayer := Q_Fi/N_FiLayer = 0.133333 L/s  # This is the flow rate through each filter layer
ND_FiBwManTrunk := NominalDiameter(CeilNearest(D_circle(Q_Fi/V_FiBwManMaxPR), AvailPipeSizes(PS_Default)[:, 0]), PS_Default) = 2 in
L_FiBwManCoupling := 2.844 in  # McMaster-carr for 2in pipe, sched 40
# Backwash Manifold Design and Total Slot Area
# Manifold Pipe Lengths
# These might change depending on connectors etc. used in new fabrication methods.
L_FiManCouplingOffset := 0.5*innerdiameter(ND_FiPipe, PS_Fi) - ConRadius(ND_FiManTrunk)/tan(asin(2*ConRadius(ND_FiManTrunk)/innerdiameter(ND_FiPipe, PS_Fi))) = 1.30423 mm
L_FiBwManCouplingOffset := 0.5*innerdiameter(ND_FiPipe, PS_Fi) - ConRadius(ND_FiBwManTrunk)/tan(asin(2*ConRadius(ND_FiBwManTrunk)/innerdiameter(ND_FiPipe, PS_Fi))) = 3.89179 mm
L_FiManCapOffset := 0.5*innerdiameter(ND_FiPipe, PS_Fi) - ConRadius(ND_FiManBranch)/tan(asin(2*ConRadius(ND_FiManBranch)/innerdiameter(ND_FiPipe, PS_Fi)))
L_FiManCapOffset = 0.637665 mm
L_FiBwManCapOffset := 0.5*innerdiameter(ND_FiPipe, PS_Fi) - ConRadius(ND_FiBwManBranch)/tan(asin(2*ConRadius(ND_FiBwManBranch)/innerdiameter(ND_FiPipe, PS_Fi)))
L_FiBwManCapOffset = 0.637665 mm
S_FiManBranchEnds := L_FiManCouplingOffset + L_FiManCoupling + outerdiameter(ND_FiManBranch)/2 = 6.51598 cm
# distance from inner end of filter body to center of nearest branch
S_FiBwManBranchEnds := L_FiBwManCouplingOffset + L_FiBwManCoupling + outerdiameter(ND_FiBwManBranch)/2 = 8.67974 cm
L_FiManTrunk := (innerdiameter(ND_FiPipe, PS_Fi) - CapThickness(ND_FiManTrunk)) - L_FiManCouplingOffset = 11.7629 in
# Assume caps have flat ends.
L_FiBwManTrunk := (innerdiameter(ND_FiPipe, PS_Fi) - CapThickness(ND_FiBwManTrunk)) - L_FiBwManCouplingOffset = 11.6285 in
S_FiManBranch := (innerdiameter(ND_FiPipe, PS_Fi) - 2*S_FiManBranchEnds)/(N_FiManBranch - 1) = 5.76352 cm
S_FiBwManBranch := (innerdiameter(ND_FiPipe, PS_Fi) - 2*S_FiBwManBranchEnds)/(N_FiManBranch - 1) = 4.32101 cm
B_FiManBranch := S_FiManBranch + outerdiameter(ND_FiManBranch) = 7.89712 cm
B_FiBwManBranch := S_FiBwManBranch + outerdiameter(ND_FiBwManBranch) = 6.45461 cm
# Length of Branches (one side) | Assume caps have flat ends.
L_FiManBranch :=
    for i ∈ 0 .. N_FiManBranch - 1
        L[i] ←
            (0.5*innerdiameter(ND_FiPipe, PS_Fi)*sin(acos((0.5*innerdiameter(ND_FiPipe, PS_Fi) - S_FiManBranchEnds + ConRadius(ND_FiManBranch) - S_FiManBranch*i)/(0.5*innerdiameter(ND_FiPipe, PS_Fi)))) - 0.5*innerdiameter(ND_FiManTrunk, PS_FiBranch)) - CapThickness(ND_FiManBranch) if i < N_FiManBranch/2
            (0.5*innerdiameter(ND_FiPipe, PS_Fi) - 0.5*innerdiameter(ND_FiManTrunk, PS_FiBranch) - L_FiManCapOffset - CapThickness(ND_FiManBranch)) if i + 0.5 == N_FiManBranch/2
            L[N_FiManBranch - 1 - i] otherwise
    L
    = [0.0971106; 0.128928; 0.128928; 0.0971106] m
L_FiManBranch = [3.82325; 5.07591; 5.07591; 3.82325] in
L_FiBwManBranch :=
    for i ∈ 0 .. N_FiManBranch - 1
        L[i] ←
            (0.5*innerdiameter(ND_FiPipe, PS_Fi)*sin(acos((0.5*innerdiameter(ND_FiPipe, PS_Fi) - S_FiBwManBranchEnds + ConRadius(ND_FiBwManBranch) - S_FiBwManBranch*i)/(0.5*innerdiameter(ND_FiPipe, PS_Fi)))) - 0.5*innerdiameter(ND_FiBwManTrunk, PS_FiBranch)) - CapThickness(ND_FiBwManBranch) if i < N_FiManBranch/2
            (0.5*innerdiameter(ND_FiPipe, PS_Fi) - 0.5*innerdiameter(ND_FiBwManTrunk, PS_FiBranch) - L_FiManCapOffset - CapThickness(ND_FiBwManBranch)) if i + 0.5 == N_FiManBranch/2
            L[N_FiManBranch - 1 - i] otherwise
    L
L_FiBwManBranch = [3.94132; 4.64273; 4.64273; 3.94132] in
# Total Lengths of Slotted pipes needed on one trunk (assuming that pipes are simply driven through the trunks without connectors):
L_FiBwManBranchTotal := 2*L_FiBwManBranch + innerdiameter(ND_FiBwManTrunk, PS_FiBranch) = [0.252721; 0.288353; 0.288353; 0.252721] m
L_FiManBranchTotal := 2*L_FiBwManBranch + innerdiameter(ND_FiManTrunk, PS_FiBranch) = [0.226864; 0.262495; 0.262495; 0.226864] m
# Total Lengths of Slotted pipe needed for all branches:
L_FiBwManBranchNeeded := sum(L_FiBwManBranchTotal) = 1.08215 m
L_FiManBranch1SlotNeeded := sum(L_FiManBranchTotal) = 0.978718 m
L_FiManBranch2SlotNeeded := (N_FiLayer - 2)*sum(L_FiManBranch) = 1.80831 m
# This section needs to be changed if we're switching to flexible tubing:
L_FiInBodytoValvePipe := 2*SocketDepth(ND_FiManTrunk) + (outerradius(ND_FiManPipe) - innerdiameter(ND_FiManPipe, PS_FiBranch)/2) + ValveSocket(ND_FiManTrunk) + S_Fitting
L_FiInBushingtoElbowPipe := 2*SocketDepth(ND_FiManPipe) + T_PlantWall + S_Fitting
L_BushingtoValvePipe := SocketDepth(ND_FiManTrunk) + ValveSocket(ND_FiManTrunk)
L_ElbowtoValvePipeOut := 2*SocketDepth(ND_FiManTrunk)
L_FiOutBushingtoBodyPipe := L_FiInBodytoValvePipe
L_FiCheckValve := .1651 m
L_BottomPipe := L_FiInBodytoValvePipe + L_FiBallValve*ND_FiManTrunk/(2 in) - ValveSocket(ND_FiManTrunk) + SocketDepth(ND_FiManTrunk) = 0.216162 m
L_ValvetoTeePipe := L_BushingtoValvePipe + (ElbowRadius(ND_FiManPipe) - ShortTeeLength(ND_FiManPipe))
L_TeetoTeeVertPipe := 2*T_FiLayer - TeeLength(ND_FiManPipe)
L_ElbowtoTeeVertPipe := 2*T_FiLayer - ElbowRadius(ND_FiManPipe) - ShortTeeLength(ND_FiManPipe)
L_HydDisPipe := L_FiBodyPipe - (T_Flange + ConRadius(ND_FiManTrunk)) + ShortTeeLength(ND_FiManPipe) + 2*SocketDepth(ND_FiManPipe) - (CouplingLength(ND_FiManPipe) - SocketDepth(ND_FiManPipe))
L_TeetoCapVertPipe := T_FiLayer - ShortTeeLength(ND_FiManPipe)
L_BWOut := 2*SocketDepth(ND_FiBwManTrunk)
L_BedTester := 170 cm
S_Fi := 2*ElbowRadius(ND_FiBwManTrunk) + 2*SocketDepth(ND_FiBwManTrunk) + L_FiBallValve*ND_FiBwManTrunk/(2 in) + ShortTeeLength(ND_FiManPipe) + 2*SocketDepth(ND_FiManPipe) + ElbowRadius(ND_FiManPipe) + ConRadius(ND_FiManPipe) + outerdiameter(ND_FiPipe)/2 + 2*S_Fitting
S_Fi = 0.934656 m
L_BWHoriz := 2*SocketDepth(ND_FiBwManTrunk)
L_BWOutlet := L_BWOut + L_FiBodyPipe + H_FiCap - (T_Flange + ConRadius(ND_FiManTrunk) + ElbowRadius(ND_FiBwManTrunk))
L_FiDrainElbowPipe := S_Fi/2 - ShortTeeLength(ND_FiManPipe) - ElbowRadius(ND_FiManPipe)
L_FiTeetoReducer := 2*SocketDepth(ND_FiManPipe) = 0.092 m
# Slot Specifications and Headloss
L_FiBwManBranchTot := 2*(sum(L_FiBwManBranch) - N_FiManBranch*Pi_CapHeight*CapHeight(ND_FiBwManBranch)) = 28.1487 in
# This is the total length of branch manifold available on a trunk (i.e., the length available for slots on 2*N.FiManBranch)
L_FiManBranchTot := 2*(sum(L_FiManBranch) - N_FiManBranch*Pi_CapHeight*CapHeight(ND_FiBwManBranch)) = 29.4091 in
# We select  B_FiBwManSlot := 1/8*in = 3.175 mm  for the closest slot spacing, and N_FiBwSlotRows := 1  for best structural integrity of these pipes
# We select  B_FiManSlot := 1/8*in = 3.175 mm  for the closest slot spacing, and N_FiSlotRows := 2  for best structural integrity of these pipes
Q_FiBwManBranch := Q_Fi/N_FiManBranch = 0.2 L/s
PR_FiBwManBranch := (Q_FiBwManBranch/(π*innerdiameter(ND_FiBwManBranch, PS_FiBranch)^2/4))^2/(2*g) = 5.30681 cm
HL_FiBwSlot := PR_FiBwManBranch/Pi_FiManifoldHeadLoss = 19.1236 cm
# This is the minimum HL from ALL Bw slots, the check below chooses a greater headloss (by making slots smaller) if this produces unviable slot length (Pi.SlotCirc>0.4) for the chosen branch diameter
C_Check := 0
HL_FiBwSlotCheck :=
    while C_Check == 0
        A_FiBwManSlots ← A_orifice(HL_FiBwSlot, Pi_VenaContractaOrifice, Q_Fi)
        L_FiBwManSlotBranchTotal ← A_FiBwManSlots/W_FiManSlots
        N_FiBwManSlotsPerTrunk ← N_FiBwSlotRows*floor((L_FiBwManBranchTot - B_FiBwManSlot)/(B_FiBwManSlot + W_FiManSlots))
        L_FiBwManSlotCurvedInner ← L_FiBwManSlotBranchTotal/N_FiBwManSlotsPerTrunk
        C_FiBwManInner ← π*innerdiameter(ND_FiBwManBranch, PS_FiBranch)
        Pi_SlotCirc ← L_FiBwManSlotCurvedInner/C_FiBwManInner
        C_Check ← 1 if Pi_SlotCirc < 0.4
        HL_FiBwSlot ← HL_FiBwSlot + 0.05 cm otherwise
    return HL_FiBwSlot
# The slots should be configured to provide this total amount of slot area for the
# bottom manifold handling the backwash flow. We will define this as the inner diameter area of the slots
# The slots cumulatively on all branch pipes on 1 trunk must have this total length to provide the required area.
# We assume that atleast 20% of the manifold circumference must be conserved for structural integrity purposes while slotting it.
# This translates to a 40% max curved length of Bw Slot
HL_FiBwSlot := HL_FiBwSlotCheck = 19.1236 cm
A_FiBwManSlots := A_orifice(HL_FiBwSlot, Pi_VenaContractaOrifice, Q_Fi) = 6.55676 cm^2
HL_FiBwSlotForward := h_orifice(D_circle(A_FiBwManSlots*ε_FiSand), Pi_VenaContractaOrifice, Q_FiLayer) = 3.32007 cm
# A check to see that head loss through the backwash slots is small in filtration mode (we want good flow distribution between layers, so the bottom layer should not have significantly more slot head loss)
HL_FiBwSlot/HL_FiBwSlotForward = 5.76
A_FiManSlots := 2*A_FiBwManSlots = 13.1135 cm^2  # Inner manifolds have double the slot area of the upper and lower manifolds
# A conservative estimate of the head loss through the slots of the normal inlet manifold given sand blockage
HL_FiSlot := (2*Q_FiLayer/(Pi_VenaContractaOrifice*A_FiManSlots*ε_FiSand))^2*1/(2*g) = 3.32007 cm
# Final Slot Geometry:
L_FiBwManSlotBranchTotal := A_FiBwManSlots/W_FiManSlots = 3.22675 m
L_FiManSlotBranchTotal := A_FiManSlots/W_FiManSlots = 6.4535 m
N_FiBwManSlotsPerTrunk := N_FiBwSlotRows*floor((L_FiBwManBranchTot - B_FiBwManSlot)/(B_FiBwManSlot + W_FiManSlots)) = 210
N_FiManSlotsPerTrunk := N_FiSlotRows*floor((L_FiManBranchTot - B_FiManSlot)/(B_FiManSlot + W_FiManSlots)) = 440
L_FiBwManSlotCurvedInner := L_FiBwManSlotBranchTotal/N_FiBwManSlotsPerTrunk = 0.60494 in
L_FiManSlotCurvedInner := L_FiManSlotBranchTotal/N_FiManSlotsPerTrunk = 0.577443 in
C_FiBwManInner := π*innerdiameter(ND_FiBwManBranch, PS_FiBranch) = 1.95407 in
C_FiManInner := π*innerdiameter(ND_FiManBranch, PS_FiBranch) = 1.95407 in
Pi_FiBwSlotCirc := L_FiBwManSlotCurvedInner/C_FiBwManInner = 0.309579  # Check for whether Pi.SlotCirc <  0.4
Pi_FiSlotCirc := L_FiManSlotCurvedInner/C_FiManInner = 0.295508
C_FiBwManOuter := π*outerdiameter(ND_FiBwManBranch) = 2.63894 in
C_FiManOuter := π*outerdiameter(ND_FiManBranch) = 2.63894 in
L_FiBwManSlotInner := 2*innerdiameter(ND_FiBwManBranch, PS_FiBranch)/2*sin(2*π*L_FiBwManSlotCurvedInner/C_FiBwManInner/2) = 0.513982 in
L_FiManSlotInner := 2*innerdiameter(ND_FiManBranch, PS_FiBranch)/2*sin(2*π*L_FiManSlotCurvedInner/C_FiManInner/2) = 1.26492 cm
H_FiBwManCenterToSlot := sqrt((innerdiameter(ND_FiBwManBranch, PS_FiBranch)/2)^2 - (L_FiBwManSlotInner/2)^2) = 0.175148 in
H_FiManCenterToSlot := sqrt((innerdiameter(ND_FiManBranch, PS_FiBranch)/2)^2 - (L_FiManSlotInner/2)^2) = 0.186334 in
L_FiBwManSlotOuter := 2*sqrt(outerradius(ND_FiBwManBranch)^2 - H_FiBwManCenterToSlot^2) = 0.763474 in
L_FiManSlotOuter := 2*sqrt(outerradius(ND_FiManBranch)^2 - H_FiManCenterToSlot^2) = 0.752807 in
H_FiBwSlot := outerradius(ND_FiBwManBranch) - H_FiBwManCenterToSlot = 0.621925 cm
H_FiSlot := outerradius(ND_FiManBranch) - H_FiManCenterToSlot = 0.593512 cm
# FINAL SPECIFICATIONS FOR BRANCHES:
# BACKWASH TRUNK: We need pipes of diameter  ND_FiBwManBranch = 0.5 in, with slots of width W_FiManSlots = 0.2032 mm, straight length L_FiBwManSlotOuter = 0.763474 in  and a spacing of  B_FiBwManSlot = 0.125 in. This is a total length of L_FiBwManBranchNeeded = 3.55035 ft with N_FiBwSlotRows = 1 rows of slots
# TOP FILTER TRUNK:  we need pipes of diameter  ND_FiManBranch = 0.5 in  with slots of width  W_FiManSlots = 0.2032 mm,straight length L_FiManSlotOuter = 1.91213 cm, and a spacing of B_FiManSlot = 0.125 in  This is a total length of L_FiManBranch1SlotNeeded = 3.21102 ft with N_FiBwSlotRows = 1 rows of slots
# MIDDLE FILTER TRUNKS:  we need  pipes of diameter  ND_FiManBranch = 0.5 in  with slots of width  W_FiManSlots = 0.2032 mm,straight length L_FiManSlotOuter = 0.752807 in, and a spacing of B_FiManSlot = 0.125 in  This is a total length of L_FiManBranch2SlotNeeded = 5.93277 ft with N_FiSlotRows = 2 rows of slots
H_FiBottomLayer := H_FiBottomLayerF(ND_FiManTrunk, ND_FiBwManTrunk) = 20 cm
HL_FiCleanBottomLayer := h_lKozeny(H_FiBottomLayer, D_FiSand60, V_FiLayer, ε_FiSand, Nu_Water) = 5.56209 cm
H_FiSand := (N_FiLayer - 1)*H_FiLayer + H_FiBottomLayer + outerradius(ND_FiManBranch) = 1.21067 m
H_FiSandActive := H_FiSand - outerradius(ND_FiManBranch) = 1.2 m
H_FiFluidizedBed := Pi_FiFluidized*H_FiSand = 1.57387 m
# Sand bed head loss during steady state backwash.
HL_FiBwSS := H_FiSand*(Rho_FiSand - Rho_H2O)*(1 - ε_FiSand)/Rho_H2O = 1.19856 m
# The backwash head loss is almost exactly equal  to the sand bed depth. Note that this ignores losses in the plumbing.
HL_FiDirty := 40 cm  # Mickey suggested this value based on lab experience. Don't know if this is the same for the low flow filter
HL_FiTerminal := HL_FiCleanLayer + HL_FiDirty = 45.5621 cm
HL_FiBwInitiation := HL_FiBwSF + HL_FiBwSS = 1.39856 m
# How much does the filter bed over fluidize when the entrance box level lowers after backwash initiation?
H_FiFluidizedBedVariation := (HL_FiBwInitiation - HL_FiBwSS)*(W_FiEntrance*L_FiEntrance - 3*π*outerradius(ND_FiTrunk)^2 - π*outerradius(ND_FiBwTrunk)^2)/A_FiActive
# Bottom Layer Thickness, Total Sand Depth, and Backwash Head Loss
# Plumbing Head Loss
# This section needs to be redone for flexible tubing/no valve scenario
HL_FiBwInletManifold := 1/3*h_f(Q_Fi, innerD(ND_FiManTrunk, PS_Default), L_FiManTrunk, Nu_Water, E_Pvc) + h_e(Q_Fi/N_FiManBranch, innerD(ND_FiManBranch, PS_FiBranch), K_PipeEnt) + 2/3*h_f(Q_Fi/N_FiManBranch, innerD(ND_FiManBranch, PS_FiBranch), L_FiManBranch[0], Nu_Water, E_Pvc) + 1/3*h_f(Q_Fi/N_FiManBranch, innerD(ND_FiManBranch, PS_FiBranch), L_FiManBranch[1], Nu_Water, E_Pvc) + HL_FiBwSlot = 23.9033 cm
HL_FiInletManifold(Q_Layer) := 1/3*h_f(2*Q_Layer, innerD(ND_FiManTrunk, PS_Default), L_FiManTrunk, Nu_Water, E_Pvc) + h_e(2*Q_Layer/N_FiManBranch, innerD(ND_FiManBranch, PS_FiBranch), K_PipeEnt) + 2/3*h_f(2*Q_Layer/N_FiManBranch, innerD(ND_FiManBranch, PS_FiBranch), L_FiManBranch[0], Nu_Water, E_Pvc) + 1/3*h_f(2*Q_Fi/N_FiManBranch, innerD(ND_FiManBranch, PS_FiBranch), L_FiManBranch[1], Nu_Water, E_Pvc) + HL_FiSlot
HL_FiInletManifoldTop(Q_Layer) := 1/3*h_f(Q_Layer, innerD(ND_FiManTrunk, PS_Default), L_FiManTrunk, Nu_Water, E_Pvc) + h_e(Q_Layer/N_FiManBranch, innerD(ND_FiManBranch, PS_FiBranch), K_PipeEnt) + 2/3*h_f(Q_Fi/N_FiManBranch, innerD(ND_FiBwManBranch, PS_FiBranch), L_FiManBranch[0], Nu_Water, E_Pvc) + 1/3*h_f(Q_Fi/N_FiManBranch, innerD(ND_FiManBranch, PS_FiBranch), L_FiManBranch[1], Nu_Water, E_Pvc) + HL_FiSlot
HL_FiInletManifoldBottom(Q_Layer) := 1/3*h_f(Q_Layer, innerD(ND_FiBwManTrunk, PS_Default), L_FiManTrunk, Nu_Water, E_Pvc) + h_e(Q_Layer/N_FiManBranch, innerD(ND_FiManBranch, PS_FiBranch), K_PipeEnt) + 2/3*h_f(Q_Fi/N_FiManBranch, innerD(ND_FiManBranch, PS_FiBranch), L_FiManBranch[0], Nu_Water, E_Pvc) + 1/3*h_f(Q_Fi/N_FiManBranch, innerD(ND_FiManBranch, PS_FiBranch), L_FiManBranch[1], Nu_Water, E_Pvc) + HL_FiSlot
HL_FiOutletManifold(Q_Layer) := 1/3*h_f(2*Q_Layer, innerD(ND_FiBwManTrunk, PS_Default), L_FiManTrunk, Nu_Water, E_Pvc) + h_e(2*Q_Layer/N_FiManBranch, innerD(ND_FiManBranch, PS_FiBranch), K_PipeExit) + 2/3*h_f(Q_Fi/N_FiManBranch, innerD(ND_FiManBranch, PS_FiBranch), L_FiManBranch[0], Nu_Water, E_Pvc) + 1/3*h_f(Q_Fi/N_FiManBranch, innerD(ND_FiManBranch, PS_FiBranch), L_FiManBranch[1], Nu_Water, E_Pvc)
K_ballValve := 0.05
K_tee90 := 1
K_bushing := 0.20
K_checkValve := 2.5
HL_FiInletPlumbing1(Q_Layer) := h_l(Q_Layer, innerD(ND_FiManTrunk, PS_Default), L_BottomPipe, 2*K_El90 + K_PipeEnt + K_checkValve + K_bushing, Nu_Water, E_Pvc) + HL_FiInletManifoldTop(Q_Layer)
HL_FiInletPlumbing2(Q_Layer) := h_l(2*Q_Layer, innerD(ND_FiManTrunk, PS_Default), L_BottomPipe, K_El90 + K_PipeEnt + K_tee90 + K_bushing + K_checkValve, Nu_Water, E_Pvc) + HL_FiInletManifold(Q_Layer)
HL_FiInletPlumbing3(Q_Layer) := h_l(2*Q_Layer, innerD(ND_FiManTrunk, PS_Default), L_BottomPipe, K_El90 + K_PipeEnt + K_tee90 + K_bushing + K_checkValve, Nu_Water, E_Pvc) + HL_FiInletManifold(Q_Layer)
HL_FiInletPlumbing4(Q_Layer) := h_l(Q_Layer, innerD(ND_FiManTrunk, PS_Default), L_BottomPipe, K_El90 + K_tee90 + K_bushing + K_PipeEnt, Nu_Water, E_Pvc) + HL_FiInletManifoldBottom(Q_Layer)
HL_FiInletPlumbingMax(Q_1, Q_2, Q_3, Q_4) := max(HL_FiInletPlumbing1(Q_1), HL_FiInletPlumbing2(Q_2), HL_FiInletPlumbing3(Q_3), HL_FiInletPlumbing4(Q_4))
# These are numbered from the top of the filter bed down. The top and bottom inlets have half the flow rate (only serve the layers below and above, respectively). The bottom inlet has the diameter of the backwash trunk.
HL_FiInletPlumbingMin(Q_1, Q_2, Q_3, Q_4) := min(HL_FiInletPlumbing1(Q_1), HL_FiInletPlumbing2(Q_2), HL_FiInletPlumbing3(Q_3), HL_FiInletPlumbing4(Q_4))
HL_FiInletPlumbingAve(Q_1, Q_2, Q_3, Q_4) := (HL_FiInletPlumbing1(Q_1) + HL_FiInletPlumbing2(Q_2) + HL_FiInletPlumbing3(Q_3) + HL_FiInletPlumbing4(Q_4))/4
HL_FiBwInletPlumbing := h_l(Q_Fi, innerD(ND_FiManTrunk, PS_Default), L_BottomPipe, K_El90 + K_tee90 + K_bushing + K_PipeEnt, Nu_Water, E_Pvc) + HL_FiBwInletManifold = 42.7725 cm
HL_FiOutletPlumbing1(Q_Layer) := h_l(2*Q_Layer, innerD(ND_FiManTrunk, PS_Default), L_BottomPipe, K_El90 + K_PipeEnt + K_tee90 + K_bushing + K_checkValve, Nu_Water, E_Pvc) + HL_FiOutletManifold(Q_Layer)
HL_FiOutletPlumbing2(Q_Layer) := HL_FiOutletPlumbing1(Q_Layer)
HL_FiOutletPlumbing3(Q_Layer) := HL_FiOutletPlumbing1(Q_Layer)
HL_FiOutletPlumbingMax(Q_1, Q_3) := max(HL_FiOutletPlumbing1(Q_1), HL_FiOutletPlumbing2(Q_1), HL_FiOutletPlumbing3(Q_3))
HL_FiOutletPlumbingMin(Q_1, Q_3) := min(HL_FiOutletPlumbing1(Q_1), HL_FiOutletPlumbing2(Q_1), HL_FiOutletPlumbing3(Q_3))
HL_FiOutletPlumbingAve(Q_1, Q_3) := (HL_FiOutletPlumbing1(Q_1) + HL_FiOutletPlumbing2(Q_1) + HL_FiOutletPlumbing3(Q_3))/3
# Path Head Loss Calculations and Flow Distribution Between Layers
HL_FiCleanLyr(Q) := h_lKozeny(H_FiLayer, D_FiSand60, Q/A_FiActive, ε_FiSand, Nu_Water)
HL_FiCleanBottomLyr(Q) := h_lKozeny(H_FiBottomLayer, D_FiSand60, Q/A_FiActive, ε_FiSand, Nu_Water)
HL_FiPathClean1(Q_Path) := HL_FiInletPlumbing1(Q_Path) + HL_FiCleanLyr(Q_Path) + HL_FiOutletPlumbing1(Q_Path)
HL_FiPathClean2(Q_Path) := HL_FiInletPlumbing2(Q_Path) + HL_FiCleanLyr(Q_Path) + HL_FiOutletPlumbing1(Q_Path)
HL_FiPathClean3(Q_Path) := HL_FiInletPlumbing2(Q_Path) + HL_FiCleanLyr(Q_Path) + HL_FiOutletPlumbing2(Q_Path)
HL_FiPathClean4(Q_Path) := HL_FiInletPlumbing3(Q_Path) + HL_FiCleanLyr(Q_Path) + HL_FiOutletPlumbing2(Q_Path)
HL_FiPathClean5(Q_Path) := HL_FiInletPlumbing3(Q_Path) + HL_FiCleanLyr(Q_Path) + HL_FiOutletPlumbing3(Q_Path)
HL_FiPathClean6(Q_Path) := HL_FiInletPlumbing4(Q_Path) + HL_FiCleanBottomLyr(Q_Path) + HL_FiOutletPlumbing3(Q_Path)
HL_FiPathCleanMax(Q_1, Q_2, Q_3, Q_4, Q_5, Q_6) := max(HL_FiPathClean1(Q_1), HL_FiPathClean2(Q_2), HL_FiPathClean3(Q_3), HL_FiPathClean4(Q_4), HL_FiPathClean5(Q_5), HL_FiPathClean6(Q_6))
HL_FiPathCleanMin(Q_1, Q_2, Q_3, Q_4, Q_5, Q_6) := min(HL_FiPathClean1(Q_1), HL_FiPathClean2(Q_2), HL_FiPathClean3(Q_3), HL_FiPathClean4(Q_4), HL_FiPathClean5(Q_5), HL_FiPathClean6(Q_6))
# In reality the flow will distribute itself such that all paths have the same head loss. We will treat the average of all of the calculated path head losses as the actual complete head loss accross all paths.
HL_FiPathCleanAve(Q_1, Q_2, Q_3, Q_4, Q_5, Q_6) := (HL_FiPathClean1(Q_1) + HL_FiPathClean2(Q_2) + HL_FiPathClean3(Q_3) + HL_FiPathClean4(Q_4) + HL_FiPathClean5(Q_5) + HL_FiPathClean6(Q_6))/6
Pi_QFiLayer(Q_1, Q_2, Q_3, Q_4, Q_5, Q_6) := sqrt(HL_FiPathCleanMin(Q_1, Q_2, Q_3, Q_4, Q_5, Q_6)/HL_FiPathCleanMax(Q_1, Q_2, Q_3, Q_4, Q_5, Q_6))
# This estimate is reasonable as long as the answer is close to 1
# Guess:
Q_2 := Q_FiLayer
Q_3 := Q_FiLayer
Q_4 := Q_FiLayer
Q_5 := Q_FiLayer
Q_6 := Q_FiLayer
Q_1 := Q_FiLayer
Given
HL_FiPathClean1(Q_1) == HL_FiPathClean2(Q_2)
HL_FiPathClean2(Q_2) == HL_FiPathClean3(Q_3)
Q_1 + Q_2 + Q_3 + Q_4 + Q_5 + Q_6 == Q_Fi
HL_FiPathClean3(Q_3) == HL_FiPathClean4(Q_4)
HL_FiPathClean4(Q_4) == HL_FiPathClean5(Q_5)
HL_FiPathClean5(Q_5) == HL_FiPathClean6(Q_6)
HL_FiPath(Q) := Find(Q_1, Q_2, Q_3, Q_4, Q_5, Q_6)
Q_FiPath := HL_FiPath(Q_Fi) = [0.151351; 0.123171; 0.123171; 0.123171; 0.123171; 0.155963] L/s
Q_FiLayer1 := Q_FiPath[0]
Q_FiLayer2 := Q_FiPath[1]
HL_FiPathClean1(Q_FiPath[0]) = 0.197426 m
Q_FiLayer3 := Q_FiPath[2]
HL_FiPathClean2(Q_FiPath[1]) = 0.197426 m
Q_FiLayer4 := Q_FiPath[3]
HL_FiPathClean3(Q_FiPath[2]) = 0.197426 m
HL_FiCleanPath := HL_FiPathClean1(Q_FiPath[0])
Q_FiLayer5 := Q_FiPath[4]
HL_FiPathClean4(Q_FiPath[3]) = 0.197426 m
Q_FiLayer6 := Q_FiPath[5]
HL_FiPathClean5(Q_FiPath[4]) = 0.197426 m
HL_FiPathClean6(Q_FiPath[5]) = 0.197426 m
# Redo for new backwash manifold
# Backwash Drain Design
ND_FiBwDrain := D_pipeschedule(Q_Fi, PS_Fi, (L_FiBodyPipe - N_FiLayer*T_FiLayer)/2, L_FiBodyPipe, Nu_Water, E_Pvc, 3*K_El90) = 1.5 in
ND_FiBwDrain := 2 in  # increase this pipe size to descrease bw headloss
L_FiSiphonEst := L_BWOutlet + L_BWHoriz
K_FiSiphon := 3*K_El90 + K_PipeEnt + K_PipeExit = 4.2  # 3 elbows on Backwash Drain
# Siphon has to handle the entire flow into the filter plus drain the terminal head in Ti.FiBwInitiation.  This is approximately a "hole in a bucket problem" so the average flow rate is half the max flow (hence the factor of 2).  The HL sum corresponds to the height of water that needs to be drained. Use maximum head loss through the siphon for conservative estimate.
Q_FiSiphonInitiation := Q_Fi + 2*A_FiActive*(HL_FiBwSF + H_FiForwardNoSuckAir + HL_FiDirty + HL_FiBwInletPlumbing + HL_FiBwSS + HL_FiSiphonMax - H_FiSiphonNoSuckAir)/Ti_FiBwInitiationBod = 2.76064 L/s
HL_FiSiphonMax := 30 cm
HL_FiSiphonInitiationMax := HL_FiBwSF + H_FiForwardNoSuckAir + HL_FiDirty + HL_FiBwInletPlumbing + HL_FiBwSS + HL_FiSiphonMax - H_FiSiphonNoSuckAir = 8.28834 ft
HL_FiSiphonPipe := h_l(Q_Fi, innerdiameter(ND_FiBW, PS_Default), L_FiSiphonEst, K_FiSiphon, Nu_Water, E_Pvc)
HL_FiSiphonOutlet := Headloss_weir(Q_Fi, innerD(ND_FiBW, PS_Default))
D_FiSiphonManOrifices := innerdiameter(ND_FiBW, PS_Default)
HL_FiSiphonOrifice := h_orifice(D_FiSiphonManOrifices, Pi_VenaContractaOrifice, Q_Fi)
HL_FiBwTotalSS := max(HL_FiBwInletPlumbing + HL_FiBwSS + HL_FiSiphonOrifice + HL_FiSiphonPipe + HL_FiSiphonOutlet, 200 cm)
Rho_FiFluidized := Rho_H2O*ε_FiSand*Pi_FiFluidized + Rho_FiSand*(1 - ε_FiSand)/Pi_FiFluidized = 1743.08 kg/m^3
# Elevations
ZW_FiInlet := Z_SedLaunder - h_e(Q_Fi, innerD(ND_SedLaunder, PS_FiBranch), K_PipeEnt + K_PipeExit + K_El90)
# Water drops straight into the inlet from the launder by a 90 deg elbow
Z_FiBottom := ZW_FiInlet - HL_FiBwTotalSS
# Assuming that the backwash pipe exit is at the bottom of the filter, the bottom of the filter should be located the total backwash headloss (usually 200cm) below the inlet
# Inlet Channel Design
L_FiInletChannel := (N_Fi - 1)*S_Fi + 2*(S_Fitting + ConRadius(ND_FiManPipe)) = 0.168263 m
HL_FiEntranceWeir := Headloss_weir(Q_Fi, L_FiInletChannel)
ZW_FiInletChannel := HW_Sed - HL_FiEntranceWeir
Z_FiEntranceWeir := ZW_FiInletChannel - HL_FiEntranceWeir
ZW_FiEntranceMax := Z_FiEntranceWeir - H_FiWeirFreefall
Z_FiInletChannelBottom := Z_FiBottom + L_FiBodyPipe
H_FiInletChannel := H_Sed - Z_FiInletChannelBottom
HW_FiInletChannel := ZW_FiInletChannel - Z_FiInletChannelBottom
Pi_QFi := 0.97
HL_FiInletChannel := Headloss_weir(Q_Fi, L_FiInletChannel) - Headloss_weir(Q_Fi*Pi_QFi, L_FiInletChannel) = 0.0375789 cm
W_FiInletChannelFlowDist := W_HorizChannel(Q_Plant, HW_FiInletChannel, HL_FiInletChannel, L_FiInletChannel, Nu_Water, E_Concrete, 0)
W_FiInletChannel := max(W_FiInletChannelFlowDist, W_FiInletChannelMin)
S_FiEntranceBaffle := ((Q_Plant/T_PlantWall)^2/g)^(1/3)
S_FiBaffleToBlock := ((Q_Plant/T_PlantWall)^2/g)^(1/3)
W_FiAirRemovalBlock := T_SedWeir
ZW_FiEntranceBwSS := Z_FiInletChannelBottom + H_FiBwNoSuckAir
Z_FiAirRemovalBlockBottom := 0.15*S_FiEntranceBaffle + Z_FiInletChannelBottom
Z_FiAirRemovalBlockTop := ZW_FiEntranceBwSS - H_FiAirRemovalBlockSubmerged
# Main Plant Drain Channel
# To calculate the maximum possible flow through the drainchannel, all tanks are assumed to be initially full and emptying in the same time
# Note that the tank heights are used instead of the water levels in the calculation of maximum flow to have a conservative design.
W_PlantDC := 1 m
Q_TankDrainMax := Q_pipeminor(innerdiameter(ND_EtDrain, PS_Default), H_Et, K_PipeEnt + K_PipeExit)*2 + Q_pipeminor(innerdiameter(ND_FlocValve, PS_Default), H_Floc, K_PipeEnt + K_PipeExit)*1 + Q_pipeminor(innerdiameter(ND_SedSludgePipe, PS_Default), HW_Sed, K_PipeEnt + K_PipeExit)*N_SedBays*N_SedTanks
Q_pipeminor(innerdiameter(ND_SedSludgePipe, PS_Default), HW_Sed, K_PipeEnt + K_PipeExit) = L/s
Q_PlantDCMax := Q_TankDrainMax + N_Fi*(1 + N_Fi > 1)*Q_Fi = L/s
H_DrainChannelMax := 1 m
L_PlantDC := W_Sed + 4*T_PlantWall + L_Floc + W_Et + W_HumanMin + W_FiInletChannel + 2*T_SedWeir
ND_PlantDC := NominalDiameter(D_PipeTotal(Q_PlantDCMax, H_DrainChannelMax, L_PlantDC, Nu_Water, E_Concrete, K_PipeEnt + K_PipeExit), PS_Default)
ND_PlantSideDC := NominalDiameter(D_PipeTotal(N_Fi*(1 + N_Fi > 1)*Q_Fi, H_DrainChannelMax, L_PlantDC, Nu_Water, E_Concrete, K_PipeEnt + K_PipeExit), PS_Default)
Z_PlantDCBottom := Z_FiBottom - H_DrainChannelMax
# Sand Drain | Must be changed for flexible tubing design
ND_FiSandOutlet = 1 in
# For position of Outlet, Must calculate the position of the sand drain based on the amount of spae taken up by gasket/bottom seal. Sand drain goes right above that
Q_pipeminor(innerdiameter(ND_SedSludgePipe, PS_Default), HW_Sed, K_PipeEnt + K_PipeExit) = L/s
# Length of flexible tubing/straight tubing required
