Q_Plant := 6*L/s
# [reference: ExpertInputs.xmcd]
# [reference: MathFunctions.xmcd]
# [reference: PipeDatabase.xmcd]
# [reference: MaterialsDatabase.xmcd]
# [reference: FluidsFunctions.xmcd]
# [reference: SedTankFunctions.xmcd]
# [reference: CdcFunctions.xmcd]
# [reference: LfomFunctions.xmcd]
# [reference: SedimentationTank.xmcd]
# [reference: Flocculator.xmcd]
# [reference: LFOM.xmcd]
# [reference: EntranceTankmrf222TEST.xmcd]
# [reference: SRSFmrf222TEST.xmcd]
# [reference: LinearCdc.xmcd]
# [reference: ChemStorageTanks.xmcd]
# [reference: MtoATranslators.xmcd]
# [reference: MtoATranslatorsWrapped.xmcd]
# [reference: ChannelF.xmcd]
# [reference: PlumbingF.xmcd]
# [reference: TankF.xmcd]
# [reference: StairsF.xmcd]
# [reference: DrainChannelF.xmcd]
# [reference: FlocculatorAC.xmcd]
# [reference: SedimentationTankAC.xmcd]
# [reference: EntranceTankACmrf222TEST.xmcd]
# [reference: ChemStockTanksAC.xmcd]
# [reference: SRSFACmrf222TEST.xmcd]
# Width and length of the chemical platform are defined in ChemStockTanksAC
ChemPlatform_Origin := [
    CoagTank_Origin[0] + R_CoagTank + T_ChemTankWall + S_ChemTankBorder - L_EtChemPlatform;
    Et_Origin[1] + W_Et + T_PlantWall - W_EtChemPlatform;
    CoagTank_Origin[2] - T_ChemTankWall - T_PlantWall
]
ChemPlatform_Dimensions := [L_EtChemPlatform; W_EtChemPlatform; T_PlantWall]
# Chemical Dose Controller
# Dimensions
# Length of the float pipe must fill both caps plus some.
L_CdcFloat := 2*(CapHeight(ND_EtFloat) - CapThickness(ND_EtFloat)) + 1 in
Z_FloatTop := ZW_Et - HL_Flowmeasure + 1/2*L_CdcFloat + CapThickness(ND_EtFloat)
# The elevation of the float with the center of the float being at the bottom row of orifices of the LFOM.
L_Cable := Z_EtTop + H_LeverHole - Z_FloatTop
# five gallons bucket dimensions for constant head tanks
D_CHT := 30 cm
H_CHT := 37 cm
T_CHTwall := 1 cm
ND_DeliveryPipe := 1 in  # based on measurements in the lab and the system in Atima
PS_FlexTube := 2
L_PVCBallValve := .1625 m/2
B_DosingTubes := max(TeeLength(ND_DeliveryPipe) + 2*SocketDepth(ND_DeliveryPipe), 2*ElbowRadius(ND_DeliveryPipe) + 2*SocketDepth(ND_DeliveryPipe))
T_MountingBoard := 1.5 in
L_CoagDeliveryPipe := L_CdcCoagTube + 2*L_PVCBallValve + 2*ShortTeeLength(ND_DeliveryPipe) + ElbowRadius(ND_DeliveryPipe) + ConRadius(ND_DeliveryPipe)
L_ChlorineDeliveryPipe := L_CdcChlorineTube + 2*L_PVCBallValve + 2*ShortTeeLength(ND_DeliveryPipe) + ElbowRadius(ND_DeliveryPipe) + ConRadius(ND_DeliveryPipe)
L_DosingConnectors := L_PVCBallValve + SocketDepth(ND_DeliveryPipe)
# Origin Points
LA_Origin := [
    Et_Origin[0] - L_Et + S_EtFloat + ConRadius(ND_EtFloat);
    Et_Origin[1] + ConRadius(ND_EtFloat) + S_EtFloat/2 - L_CdcLever + T_PlantWall;
    Z_EtTop + D_LABOrigintoLAOriginZ/2
]
LA2_Origin := [LA_Origin[0] - ConRadius(ND_EtFloat) - S_EtFloat/2; LA_Origin[1]; LA_Origin[2]]
S_EtFloat = 0.1 m
LADt_Center := [
    LA_Origin[0] - L_LAOriginToDtCenterX;
    LA_Origin[1] - L_LAOriginToDtY/2;
    LA_Origin[2] + L_LAOriginToDtZ + H_LeverArm
]
LA2Dt_Center := [
    LA2_Origin[0] - L_LAOriginToDtCenterX;
    LA2_Origin[1] - L_LAOriginToDtY/2;
    LA2_Origin[2] + L_LAOriginToDtZ + H_LeverArm
]
CHT_Origin := [
    ChemPlatform_Origin[0] + 5/6*L_EtChemPlatform;
    ChemPlatform_Origin[1] - 1/2*D_CHT - T_MountingBoard;
    Z_CdcFloatValveOrifice
]
CHT2_Origin := [CHT_Origin[0] - 1.5*D_CHT; CHT_Origin[1]; CHT_Origin[2]]
Float_Origin := [
    (LA_Origin[0] + LA2_Origin[0])/2;
    LA_Origin[1] + W_LeverArm/2 + L_CdcLever;
    Z_FloatTop - CapThickness(ND_EtFloat)
]
Slider1_Origin := [
    LA_Origin[0] - H_Slider + W_Slider;
    LA_Origin[1] - L_LAOriginToDtY/2 - H_Slider;
    LA_Origin[2] + H_LeverArm + W_Slider
]
Slider2_Origin := [
    LA2_Origin[0] - H_Slider + W_Slider;
    LA2_Origin[1] - L_LAOriginToDtY/2 - H_Slider;
    LA2_Origin[2] + H_LeverArm + W_Slider
]
N_TubesTriggerStack := 2
ChlorDeliveryPipe_Origin :=
    if N_CdcCoagTubes + N_CdcChlorineTubes ≤ N_TubesTriggerStack
        [
            LA_Origin[0] + L_ChlorineDeliveryPipe + 2*(ElbowRadius(ND_DeliveryPipe) + SocketDepth(ND_DeliveryPipe));
            Et_Origin[1] - T_PlantWall - ConRadius(ND_DeliveryPipe);
            Z_Walkway + 0.75*ConRadius(ND_DeliveryPipe) + (N_CdcCoagTubes + 2)*B_DosingTubes + ElbowRadius(ND_DeliveryPipe) + SocketDepth(ND_DeliveryPipe)
        ]
    if L_CoagDeliveryPipe ≤ L_ChlorineDeliveryPipe
        [
            LA_Origin[0] + L_ChlorineDeliveryPipe;
            Et_Origin[1] - T_PlantWall - ConRadius(ND_DeliveryPipe);
            Z_Walkway + 0.75*ConRadius(ND_DeliveryPipe)
        ]
    otherwise
        [
            LA_Origin[0] + L_ChlorineDeliveryPipe;
            Et_Origin[1] - T_PlantWall - ConRadius(ND_DeliveryPipe);
            Z_Walkway + 0.75*ConRadius(ND_DeliveryPipe) - ((-ElbowRadius(ND_DeliveryPipe) - ConRadius(ND_DeliveryPipe)/2 + 2*SocketDepth(ND_DeliveryPipe) + .5*TeeLength(ND_DeliveryPipe)) - S_Fitting - 2*ConRadius(ND_DeliveryPipe))
        ]
# The first case triggers when both N values are equalt to 1, in other words when there are
# two Coag dosing tubes and two Chlor dosing tubes. This case will stack the dosing manifolds.
# The second case will nest the dosing manifolds with the chlorine delivery pipe on the bottom.
# The third case will nest the dosing manifolds with the coagulant delivery pipe on the bottom.
ChlorDosingTube_Origin :=
    if N_CdcCoagTubes + N_CdcChlorineTubes ≤ N_TubesTriggerStack
        ChlorDeliveryPipe_Origin + [
            -L_PVCBallValve - SocketDepth(ND_DeliveryPipe);
            0 m;
            ElbowRadius(ND_DeliveryPipe) + 2*SocketDepth(ND_DeliveryPipe) + .5*TeeLength(ND_DeliveryPipe)
        ]
    otherwise
        ChlorDeliveryPipe_Origin + [
            -L_PVCBallValve - SocketDepth(ND_DeliveryPipe);
            0 m;
            ElbowRadius(ND_DeliveryPipe) + 2*SocketDepth(ND_DeliveryPipe) + .5*TeeLength(ND_DeliveryPipe) + (N_CdcCoagTubes + 1)*B_DosingTubes + L_PVCBallValve
        ]
OffsetCoagChlor :=
    if N_CdcCoagTubes + N_CdcChlorineTubes ≤ N_TubesTriggerStack
        [
            0 m;
            0 m;
            -((N_CdcCoagTubes + 2)*B_DosingTubes + ElbowRadius(ND_DeliveryPipe) + SocketDepth(ND_DeliveryPipe))
        ]
    if L_CoagDeliveryPipe ≤ L_ChlorineDeliveryPipe
        [
            S_Fitting + ConRadius(ND_DeliveryPipe)/2;
            0 m;
            (ElbowRadius(ND_DeliveryPipe) + ConRadius(ND_DeliveryPipe)/2 + 2*SocketDepth(ND_DeliveryPipe) + .5*TeeLength(ND_DeliveryPipe)) - S_Fitting - 2*ConRadius(ND_DeliveryPipe)
        ]
    otherwise
        [
            -S_Fitting - ConRadius(ND_DeliveryPipe)/2;
            0 m;
            (-ElbowRadius(ND_DeliveryPipe) - ConRadius(ND_DeliveryPipe)/2 + 2*SocketDepth(ND_DeliveryPipe) + .5*TeeLength(ND_DeliveryPipe)) - S_Fitting - 2*ConRadius(ND_DeliveryPipe)
        ]
CoagDeliveryPipe_Origin := OffsetCoagChlor + [
    LA_Origin[0] + L_CoagDeliveryPipe;
    Et_Origin[1] - T_PlantWall - ConRadius(ND_DeliveryPipe);
    ChlorDeliveryPipe_Origin[2]
]
LeaveSpaceForChlor :=
    2*SocketDepth(ND_DeliveryPipe) if N_CdcCoagTubes + N_CdcChlorineTubes ≤ N_TubesTriggerStack or L_CoagDeliveryPipe ≤ L_ChlorineDeliveryPipe
    3*SocketDepth(ND_DeliveryPipe) otherwise
CoagDosingTube_Origin := CoagDeliveryPipe_Origin + [
    -L_PVCBallValve - SocketDepth(ND_DeliveryPipe);
    0 m;
    ElbowRadius(ND_DeliveryPipe) + LeaveSpaceForChlor + .5*TeeLength(ND_DeliveryPipe)
]
# Lever Arms and Drop Tubes
MakeCdcLayer := layer_new("CdcLayer", black)
LArm1 := BoxF([LA_Origin[0] + 1/8*in; LA_Origin[1] - L_CdcLever; LA_Origin[2]], [LA_Origin[0]; LA_Origin[1] + L_CdcLever; LA_Origin[2] + H_LeverArm], [0; 0; 0]*deg)
DropTube1 := PipeF(LADt_Center, L_DropTube, [0; -90]*deg, ND_DropTube, PS_Modules)
# The L brackets which connect the lever arms to the entrance tank are drawn here.
LBracketLA1 := LBracket2F([
    LA_Origin[0] - L_LArmBar/2;
    LA_Origin[1] + L_LArmBar/2;
    LA_Origin[2] + L_LBracket/2 - L_LBracket/8 - 3/4*L_LBracket
], W_LBracket, L_LBracket, T_LBracket, [-90; 0; 0]*deg)
LArm2 := BoxF([LA2_Origin[0] + 1/8*in; LA2_Origin[1] - L_CdcLever; LA2_Origin[2]], [LA2_Origin[0]; LA2_Origin[1] + L_CdcLever; LA2_Origin[2] + H_LeverArm], [0; 0; 0]*deg)
DropTube2 := PipeF(LA2Dt_Center, L_DropTube, [0; -90]*deg, ND_DropTube, PS_Modules)
LBracketLA2 := LBracket2F([
    LA2_Origin[0] - L_LArmBar/2;
    LA2_Origin[1] + L_LArmBar/2;
    LA_Origin[2] + L_LBracket/2 - L_LBracket/8 - 3/4*L_LBracket
], W_LBracket, L_LBracket, T_LBracket, [-90; 0; 0]*deg)
FreezeCdcLayer := FreezeLayer("CdcLayer")
LeverArmCHT2_Script := stack(MakeCdcLayer, LArm1, LArm2, DropTube1, DropTube2, LBracketLA1, LBracketLA2, FreezeCdcLayer)
LeverArmCHT1_Script := stack(MakeCdcLayer, LArm1, DropTube1, LBracketLA1, FreezeCdcLayer)
# Connecting bars, Cylinders and Float Cable
ConnectCylinderLayer := layer_new("CdcConnectCylinder", ltgrey)
LarmBar1 := CylinderSUBF([
    LA_Origin[0] + L_LArmBar/2;
    (LA_Origin[1] + L_LArmBar/2) - W_LBracket/2;
    LA_Origin[2] + L_LBracket/2
], R_LArmBar, L_LArmBar, [0; 0]*deg, ["CdcLayer"])
# lambars are the bars that connect the lever arms to the L-brackets
LarmBar2 := CylinderSUBF([
    LA2_Origin[0] + L_LArmBar/2;
    (LA2_Origin[1] + L_LArmBar/2) - W_LBracket/2;
    LA2_Origin[2] + L_LBracket/2
], R_LArmBar, L_LArmBar, [0; 0]*deg, ["CdcLayer"])
ConnectionCylinder2 := CylinderSUBF([LA_Origin[0] + H_LeverArm; LA2_Origin[1] + L_CdcLever - 4*zc; LA_Origin[2] + 4*W_LeverArm], D_Cable, .5*L_CdcLever, [0; 0]*deg, ["CdcLayer"])
FloatCable := CylinderF([LA_Origin[0]; LA_Origin[1] + W_LeverArm/2 + L_CdcLever; Z_FloatTop], D_Cable, L_Cable, [0; 90]*deg)
FreezeConnectCylinderLayer := FreezeLayer("CdcConnectCylinder")
ConnectCyl2_Script := stack(ConnectCylinderLayer, LarmBar1, LarmBar2, ConnectionCylinder2, FloatCable, FreezeConnectCylinderLayer)
ConnectCyl1_Script := stack(ConnectCylinderLayer, LarmBar1, FloatCable, FreezeConnectCylinderLayer)
# Sliders
SliderLayer := layer_new("CdcSliders", dkgrey)
Slider2FirstSide := BoxF(Slider2_Origin, [Slider2_Origin[0] + L_Slider; Slider2_Origin[1] + W_Slider; Slider2_Origin[2] - H_Slider], [90; 0; 0]*deg)
Slider1FirstSide := BoxF(Slider1_Origin, [Slider1_Origin[0] + L_Slider; Slider1_Origin[1] + W_Slider; Slider1_Origin[2] - H_Slider], [90; 0; 0]*deg)
Slider1TopSide := BoxF(Slider1_Origin, [Slider1_Origin[0] + H_Slider; Slider1_Origin[1] + L_Slider; Slider1_Origin[2] - W_Slider], [0; 0; 0]*deg)
Slider2TopSide := BoxF(Slider2_Origin, [Slider2_Origin[0] + H_Slider; Slider2_Origin[1] + L_Slider; Slider2_Origin[2] - W_Slider], [0; 0; 0]*deg)
Slider2SecondSide := BoxF([Slider2_Origin[0] + H_Slider; Slider2_Origin[1]; Slider2_Origin[2]], [
    Slider2_Origin[0] + H_Slider + W_Slider;
    Slider2_Origin[1] + L_Slider;
    Slider2_Origin[2] - H_Slider
], [0; 0; 0]*deg)
Slider1SecondSide := BoxF([Slider1_Origin[0] + H_Slider; Slider1_Origin[1]; Slider1_Origin[2]], [
    Slider1_Origin[0] + H_Slider + W_Slider;
    Slider1_Origin[1] + L_Slider;
    Slider1_Origin[2] - H_Slider
], [0; 0; 0]*deg)
FreezeSliders := FreezeLayer("CdcSliders")
Sliders2_Script := stack(SliderLayer, Slider1FirstSide, Slider2FirstSide, Slider1TopSide, Slider2TopSide, Slider1SecondSide, Slider2SecondSide, FreezeSliders)
Sliders1_Script := stack(SliderLayer, Slider1FirstSide, Slider1TopSide, Slider1SecondSide, FreezeSliders)
# Float
FloatCapsLayer := layer_new("CdcFloatCapPlu", green)
CdcFloatCapTop := CapF(Float_Origin, [0; -90]*deg, ND_EtFloat)
CdcFloatCapBottom := CapF([Float_Origin[0]; Float_Origin[1]; Float_Origin[2] - L_CdcFloat], [0; 90]*deg, ND_EtFloat)
FreezeFloatCaps := FreezeLayer("CdcFloatCapPlu")
FloatPipeLayer := layer_new("CdcFloatPipePlu", blue)
CdcFloatPipe := PipeF(Float_Origin, L_CdcFloat, [0; -90]*deg, ND_EtFloat, PS_Default)
FreezeFloatPipe := FreezeLayer("CdcFloatPipePlu")
PlumbingLayer := stack(FloatCapsLayer, CdcFloatCapTop, CdcFloatCapBottom, FreezeFloatCaps, FloatPipeLayer, CdcFloatPipe, FreezeFloatPipe)
Cdc2_Script := stack(LeverArmCHT2_Script, ConnectCyl2_Script, Sliders2_Script, PlumbingLayer)
Cdc1_Script := stack(LeverArmCHT1_Script, ConnectCyl1_Script, Sliders1_Script, PlumbingLayer)
# Manifold
CoagManifoldPluLayer := layer_new("CoagManifoldPlu", blue)
CoagConnectorPipe := PipeF(CoagDosingTube_Origin + [L_DosingConnectors + ShortTeeLength(ND_DeliveryPipe); 0 m; 0.5*TeeLength(ND_DeliveryPipe)], 2*SocketDepth(ND_DeliveryPipe), [0; 90]*deg, ND_DeliveryPipe, PS_Default)
ArrayCoagConnectorPipe := ArrayLast(N_CdcCoagTubes + 1, 1, B_DosingTubes)
MirrorCoagConnectorPipe := Mirror3dAll("yz", [
    CoagDosingTube_Origin[0] - .5*L_CdcCoagTube;
    CoagDosingTube_Origin[1];
    CoagDosingTube_Origin[2] + 1/4*H_Et + ShortTeeLength(ND_DeliveryPipe) + .5*ND_DeliveryPipe
], "n")
CoagDeliveryConnectorPipe := PipeF(CoagDosingTube_Origin + [
    L_DosingConnectors + ShortTeeLength(ND_DeliveryPipe);
    0 m;
    -0.5*TeeLength(ND_DeliveryPipe) - 2*SocketDepth(ND_DeliveryPipe)
], 2*SocketDepth(ND_DeliveryPipe), [0; 90]*deg, ND_DeliveryPipe, PS_Default)
CoagDeliveryPipe := PipeF(CoagDeliveryPipe_Origin, L_CoagDeliveryPipe, [0; 0]*deg, ND_DeliveryPipe, PS_Default)
FreezeCoagManifoldPlu := FreezeLayer("CoagManifoldPlu")
CoagManifoldPluLongLayer := layer_new("CoagManifoldPluLong", blue)
L_CoagLongConnectorPipe := CoagDosingTube_Origin[2] - CoagDeliveryPipe_Origin[2] - .5*TeeLength(ND_DeliveryPipe) - ElbowRadius(ND_DeliveryPipe)
CoagConnectorPipeLong := PipeF(CoagDosingTube_Origin + [L_DosingConnectors + ShortTeeLength(ND_DeliveryPipe); 0 m; -.5*TeeLength(ND_DeliveryPipe)], L_CoagLongConnectorPipe, [0; -90]*deg, ND_DeliveryPipe, PS_Default)
FreezeCoagManifoldPluLongLayer := FreezeLayer("CoagManifoldPluLong")
ChlorManifoldPluLayer := layer_new("ChlorManifoldPlu", blue)
ChlorConnectorPipe := PipeF(ChlorDosingTube_Origin + [L_DosingConnectors + ShortTeeLength(ND_DeliveryPipe); 0 m; .5*TeeLength(ND_DeliveryPipe)], 2*SocketDepth(ND_DeliveryPipe), [0; 90]*deg, ND_DeliveryPipe, PS_Default)
ArrayChlorConnectorPipe := ArrayLast(N_CdcChlorineTubes + 1, 1, B_DosingTubes)
MirrorChlorConnectorPipe := Mirror3dAll("yz", [
    ChlorDosingTube_Origin[0] - .5*L_CdcChlorineTube;
    ChlorDosingTube_Origin[1];
    ChlorDosingTube_Origin[2] + 1/4*H_Et + ShortTeeLength(ND_DeliveryPipe) + .5*ND_DeliveryPipe
], "n")
L_ChlorLongConnectorPipe :=
    2*SocketDepth(ND_DeliveryPipe) if N_CdcCoagTubes + N_CdcChlorineTubes ≤ N_TubesTriggerStack
    ChlorDosingTube_Origin[2] - ChlorDeliveryPipe_Origin[2] - .5*TeeLength(ND_DeliveryPipe) - ElbowRadius(ND_DeliveryPipe) if L_ChlorineDeliveryPipe > L_CoagDeliveryPipe + 2*(ElbowRadius(ND_DeliveryPipe) + SocketDepth(ND_DeliveryPipe))
    max(ChlorDosingTube_Origin[2] - ChlorDeliveryPipe_Origin[2] - .5*TeeLength(ND_DeliveryPipe) - ElbowRadius(ND_DeliveryPipe) - (2*sin(45 deg)*(2*ElbowRadius(ND_DeliveryPipe) + 2*SocketDepth(ND_DeliveryPipe)) + (N_CdcCoagTubes + 1)*B_DosingTubes + sin(45 deg)*(1 - tan(22.5 deg))*ElbowRadius(ND_DeliveryPipe) + SocketDepth(ND_DeliveryPipe)), 2*SocketDepth(ND_DeliveryPipe)) otherwise
ChlorConnectorPipeLong := PipeF(ChlorDosingTube_Origin + [L_DosingConnectors + ShortTeeLength(ND_DeliveryPipe); 0 m; -.5*TeeLength(ND_DeliveryPipe)], L_ChlorLongConnectorPipe, [0; -90]*deg, ND_DeliveryPipe, PS_Default)
ChlorElbowConnectorPipeBottom := PipeF(ChlorDeliveryPipe_Origin + [
    ElbowRadius(ND_DeliveryPipe);
    -sin(45 deg)*ElbowRadius(ND_DeliveryPipe);
    sin(45 deg)*ElbowRadius(ND_DeliveryPipe)
], 2*SocketDepth(ND_DeliveryPipe), [45; 90]*deg, ND_DeliveryPipe, PS_Default)
L_ChlorBridgeConnectorPipe := ChlorDosingTube_Origin[2] - ChlorDeliveryPipe_Origin[2] - .5*TeeLength(ND_DeliveryPipe) - L_ChlorLongConnectorPipe - sin(45 deg)*(4*ElbowRadius(ND_DeliveryPipe) + 4*SocketDepth(ND_DeliveryPipe) + (1 - tan(22.5 deg))*ElbowRadius(ND_DeliveryPipe))
ChlorBridgeConnectorPipe := PipeF(ChlorDeliveryPipe_Origin + [
    ElbowRadius(ND_DeliveryPipe);
    -(sin(45 deg)*(ElbowRadius(ND_DeliveryPipe) + 2*SocketDepth(ND_DeliveryPipe)) + (1 - sin(45 deg))*ElbowRadius(ND_DeliveryPipe));
    sin(45 deg)*(ElbowRadius(ND_DeliveryPipe) + 2*SocketDepth(ND_DeliveryPipe)) + sin(45 deg)*ElbowRadius(ND_DeliveryPipe)
], L_ChlorBridgeConnectorPipe, [0; 90]*deg, ND_DeliveryPipe, PS_Default)
ChlorElbowConnectorPipeTop := PipeF(ChlorDosingTube_Origin + [
    L_DosingConnectors + ShortTeeLength(ND_DeliveryPipe);
    -sin(45 deg)*(2*SocketDepth(ND_DeliveryPipe) + (1 - tan(22.5 deg))*ElbowRadius(ND_DeliveryPipe)) - (1 - sin(45 deg))*ElbowRadius(ND_DeliveryPipe);
    -.5*TeeLength(ND_DeliveryPipe) - L_ChlorLongConnectorPipe - sin(45 deg)*(2*SocketDepth(ND_DeliveryPipe) + (1 - tan(22.5 deg))*ElbowRadius(ND_DeliveryPipe) + ElbowRadius(ND_DeliveryPipe))
], 2*SocketDepth(ND_DeliveryPipe) + (1 - tan(22.5 deg))*ElbowRadius(ND_DeliveryPipe), [-45; 90]*deg, ND_DeliveryPipe, PS_Default)
ChlorDeliveryConnectorPipe := PipeF(ChlorDosingTube_Origin + [
    L_DosingConnectors + ShortTeeLength(ND_DeliveryPipe);
    0 m;
    -0.5*TeeLength(ND_DeliveryPipe) - 2*SocketDepth(ND_DeliveryPipe)
], 2*SocketDepth(ND_DeliveryPipe), [0; 90]*deg, ND_DeliveryPipe, PS_Default)
ChlorineDeliveryPipe := PipeF(ChlorDeliveryPipe_Origin, L_ChlorineDeliveryPipe, [0; 0]*deg, ND_DeliveryPipe, PS_Default)
FreezeChlorManifoldPlu := FreezeLayer("ChlorManifoldPlu")
ManifoldFittingsLayer := layer_new("CdcManifoldFittings", green)
ElbowCoagCHT := ElbowF(CoagDeliveryPipe_Origin + [-L_CoagDeliveryPipe; 0 m; 0 m], [90; 0; -90]*deg, ND_DeliveryPipe, PS_Default)
ElbowChlorCHT := ElbowF(ChlorDeliveryPipe_Origin + [-L_ChlorineDeliveryPipe; 0 m; 0 m], [90; 0; -90]*deg, ND_DeliveryPipe, PS_Default)
ElbowCoagDosing := ElbowF(CoagDeliveryPipe_Origin, [-90; 0; 90]*deg, ND_DeliveryPipe, PS_Default)
Angle_Elbow90ChlorDosing :=
    [-90; 0; 90]*deg if N_CdcCoagTubes + N_CdcChlorineTubes ≤ N_TubesTriggerStack or L_ChlorineDeliveryPipe > L_CoagDeliveryPipe + 2*(ElbowRadius(ND_DeliveryPipe) + SocketDepth(ND_DeliveryPipe))
    [-90; 0; 135]*deg otherwise
Elbow90ChlorDosing := ElbowF(ChlorDeliveryPipe_Origin, Angle_Elbow90ChlorDosing, ND_DeliveryPipe, PS_Default)
Elbow45ChlorDosingBottom := Elbow45F(ChlorDeliveryPipe_Origin + [
    ElbowRadius(ND_DeliveryPipe);
    -(ElbowRadius(ND_DeliveryPipe) + 2*sin(45 deg)*SocketDepth(ND_DeliveryPipe));
    sin(45 deg)*(2*ElbowRadius(ND_DeliveryPipe) + 2*SocketDepth(ND_DeliveryPipe))
], [0; 90; -90]*deg, ND_DeliveryPipe, PS_Default)
Elbow45ChlorDosingMiddle := Elbow45F(ChlorDosingTube_Origin + [
    L_DosingConnectors + ShortTeeLength(ND_DeliveryPipe);
    -sin(45 deg)*(2*SocketDepth(ND_DeliveryPipe) + (1 - tan(22.5 deg))*ElbowRadius(ND_DeliveryPipe)) - (1 - sin(45 deg))*ElbowRadius(ND_DeliveryPipe);
    -.5*TeeLength(ND_DeliveryPipe) - L_ChlorLongConnectorPipe - sin(45 deg)*(2*SocketDepth(ND_DeliveryPipe) + (1 - tan(22.5 deg))*ElbowRadius(ND_DeliveryPipe) + ElbowRadius(ND_DeliveryPipe))
], [-135; 90; 0]*deg, ND_DeliveryPipe, PS_Default)
Elbow45ChlorDosingTop := Elbow45F(ChlorDosingTube_Origin + [
    L_DosingConnectors + ShortTeeLength(ND_DeliveryPipe);
    0 m;
    -.5*TeeLength(ND_DeliveryPipe) - L_ChlorLongConnectorPipe
], [90; -90; 0]*deg, ND_DeliveryPipe, PS_Default)
# Option 1:Eliminate the top right elbow and modify the tee code and add a ball valve on top
# option 2: repla90 the top right elbow with a tee and ball valve without changing the tee code
ElbowCoagDosingBottomLeft := ElbowF(CoagDosingTube_Origin + [-L_CdcCoagTube - L_DosingConnectors; 0 m; 0 m], [90; 0; -90]*deg, ND_DeliveryPipe, PS_Default)
ElbowChlorDosingBottomLeft := ElbowF(ChlorDosingTube_Origin + [-L_CdcChlorineTube - L_DosingConnectors; 0 m; 0 m], [90; 0; -90]*deg, ND_DeliveryPipe, PS_Default)
TeeCoagDosingTopRight := TeeF(CoagDosingTube_Origin + [L_DosingConnectors; 0 m; B_DosingTubes*N_CdcCoagTubes], [90; 0; -90]*deg, ND_DeliveryPipe, PS_Default)
TeeChlorDosingTopRight := TeeF(ChlorDosingTube_Origin + [L_DosingConnectors; 0 m; B_DosingTubes*N_CdcChlorineTubes], [90; 0; -90]*deg, ND_DeliveryPipe, PS_Default)
FreezeFittings := FreezeLayer("CdcManifoldFittings")
ManifoldCoagTeeLayer := layer_new("CdcCoagTees", green)
CoagTees :=
    CoagTeeStack ← layer_new("CdcCoagTees", green)
    for i ∈ 0 .. max(N_CdcCoagTubes - 1, 0)
        CoagTeeStack ← stack(CoagTeeStack, TeeF(CoagDosingTube_Origin + [L_DosingConnectors; 0 m; B_DosingTubes*i], [90; 0; 90]*deg, ND_DeliveryPipe, PS_Default))
        CoagTeeStack ← stack(CoagTeeStack, TeeF(CoagDosingTube_Origin + [-L_CdcCoagTube - L_DosingConnectors; 0 m; B_DosingTubes*(i + 1)], [-90; 0; 90]*deg, ND_DeliveryPipe, PS_Default))
        i ← i + 1
    return CoagTeeStack
# Changed from N.CdcCoagTubes-2 to N.CdcCoagTubes-1
FreezeCoagTees := FreezeLayer("CdcCoagTees")
ChlorTees :=
    ChlorTeeStack ← layer_new("CdcChlorTees", green)
    for i ∈ 0 .. max(N_CdcChlorineTubes - 1, 0)
        ChlorTeeStack ← stack(ChlorTeeStack, TeeF(ChlorDosingTube_Origin + [L_DosingConnectors; 0 m; B_DosingTubes*i], [90; 0; 90]*deg, ND_DeliveryPipe, PS_Default))
        ChlorTeeStack ← stack(ChlorTeeStack, TeeF(ChlorDosingTube_Origin + [-L_CdcChlorineTube - L_DosingConnectors; 0 m; B_DosingTubes*(i + 1)], [-90; 0; 90]*deg, ND_DeliveryPipe, PS_Default))
        i ← i + 1
    return ChlorTeeStack
FreezeChlorTees := FreezeLayer("CdcChlorTees")
ManifoldCoagValveLayer := layer_new("CdcCoagManifoldValves", ltgrey)
CdcCoagBallValve := insertdwg("https://confluence.cornell.edu/download/attachments/173604905/PvcBallValve+Scaled.dwg", CoagDosingTube_Origin + [L_PVCBallValve; 0 m; 0 m], ND_DeliveryPipe/(2 in), ND_DeliveryPipe/(2 in), 0 deg)
RotateCdcCoagBallValve := Rotate3DLast(CoagDosingTube_Origin + [L_PVCBallValve; 0 m; 0 m], "y", -90 deg)
ArrayCoagBallValve := ArrayLast(N_CdcCoagTubes + 1, 1, B_DosingTubes)
MirrorCoagValves := Mirror3dAll("yz", [
    CoagDosingTube_Origin[0] - .5*L_CdcCoagTube;
    CoagDosingTube_Origin[1];
    CoagDosingTube_Origin[2] + 1/4*H_Et + ShortTeeLength(ND_DeliveryPipe) + .5*ND_DeliveryPipe
], "n")
CdcCoagBallValveAir := insertdwg("https://confluence.cornell.edu/download/attachments/173604905/PvcBallValve+Scaled.dwg", CoagDosingTube_Origin + [
    L_PVCBallValve + ShortTeeLength(ND_DeliveryPipe) + SocketDepth(ND_DeliveryPipe);
    0 m;
    (N_CdcCoagTubes + 1)*TeeLength(ND_DeliveryPipe) + ((2*N_CdcCoagTubes + 1)*SocketDepth(ND_DeliveryPipe)) - ShortTeeLength(ND_DeliveryPipe)
], ND_DeliveryPipe/(2 in), ND_DeliveryPipe/(2 in), 90 deg)
FreezeCoagValvesLayer := FreezeLayer("CdcCoagManifoldValves")
ManifoldChlorValveLayer := layer_new("CdcChlorManifoldValves", ltgrey)
CdcChlorineBallValve := insertdwg("https://confluence.cornell.edu/download/attachments/173604905/PvcBallValve+Scaled.dwg", ChlorDosingTube_Origin + [L_PVCBallValve; 0 m; 0 m], ND_DeliveryPipe/(2 in), ND_DeliveryPipe/(2 in), 0 deg)
RotateCdcChlorineBallValve := Rotate3DLast(ChlorDosingTube_Origin + [L_PVCBallValve; 0 m; 0 m], "y", -90 deg)  # Chlorine ball valves not showing up --> done
# All the choosing between max(N-1,1) are changed to N+1 to ensure that an extra tube is drawn in all cases. But some indices may have been messed up
ArrayChlorineBallValve := ArrayLast(N_CdcChlorineTubes + 1, 1, B_DosingTubes)
# There is an extra tee being drawn on the top right side for both chlorine and coagulant, need to figure out how to get rid of it --> done
MirrorChlorineValves := Mirror3dAll("yz", [
    ChlorDosingTube_Origin[0] - .5*L_CdcChlorineTube;
    ChlorDeliveryPipe_Origin[1];
    ChlorDeliveryPipe_Origin[2]
], "n")
CdcChlorineBallValveAir := insertdwg("https://confluence.cornell.edu/download/attachments/173604905/PvcBallValve+Scaled.dwg", ChlorDosingTube_Origin + [
    L_PVCBallValve + ShortTeeLength(ND_DeliveryPipe) + SocketDepth(ND_DeliveryPipe);
    0 m;
    (N_CdcChlorineTubes + 1)*TeeLength(ND_DeliveryPipe) + ((2*N_CdcChlorineTubes + 1)*SocketDepth(ND_DeliveryPipe)) - ShortTeeLength(ND_DeliveryPipe)
], ND_DeliveryPipe/(2 in), ND_DeliveryPipe/(2 in), 90 deg)
FreezeChlorValvesLayer := FreezeLayer("CdcChlorManifoldValves")
ViewFront := view("f")
# Air removal ball valves position not right
ManifoldFitting_Script :=
    stack(CoagManifoldPluLayer, CoagConnectorPipe, ViewFront, ArrayCoagConnectorPipe, MirrorCoagConnectorPipe, ViewTop, CoagDeliveryConnectorPipe, CoagDeliveryPipe, FreezeCoagManifoldPlu, CoagManifoldPluLongLayer, CoagConnectorPipeLong, FreezeCoagManifoldPluLongLayer, ChlorManifoldPluLayer, ChlorConnectorPipe, ViewFront, ArrayChlorConnectorPipe, MirrorChlorConnectorPipe, ViewTop, ChlorConnectorPipeLong, ChlorDeliveryConnectorPipe, ChlorineDeliveryPipe, FreezeChlorManifoldPlu, ManifoldFittingsLayer, ElbowCoagCHT, ElbowChlorCHT, ElbowCoagDosing, Elbow90ChlorDosing, TeeCoagDosingTopRight, TeeChlorDosingTopRight, ElbowCoagDosingBottomLeft, ElbowChlorDosingBottomLeft, FreezeFittings, CoagTees, FreezeCoagTees, ChlorTees, FreezeChlorTees) if N_CdcCoagTubes + N_CdcChlorineTubes ≤ N_TubesTriggerStack or L_ChlorineDeliveryPipe > L_CoagDeliveryPipe + 2*(ElbowRadius(ND_DeliveryPipe) + SocketDepth(ND_DeliveryPipe))
    stack(CoagManifoldPluLayer, CoagConnectorPipe, ViewFront, ArrayCoagConnectorPipe, MirrorCoagConnectorPipe, ViewTop, CoagDeliveryConnectorPipe, CoagDeliveryPipe, FreezeCoagManifoldPlu, CoagManifoldPluLongLayer, CoagConnectorPipeLong, FreezeCoagManifoldPluLongLayer, ChlorManifoldPluLayer, ChlorConnectorPipe, ViewFront, ArrayChlorConnectorPipe, MirrorChlorConnectorPipe, ViewTop, ChlorConnectorPipeLong, ChlorElbowConnectorPipeBottom, ChlorBridgeConnectorPipe, ChlorElbowConnectorPipeTop, ChlorDeliveryConnectorPipe, ChlorineDeliveryPipe, FreezeChlorManifoldPlu, ManifoldFittingsLayer, ElbowCoagCHT, ElbowChlorCHT, ElbowCoagDosing, Elbow90ChlorDosing, Elbow45ChlorDosingBottom, Elbow45ChlorDosingMiddle, Elbow45ChlorDosingTop, TeeCoagDosingTopRight, TeeChlorDosingTopRight, ElbowCoagDosingBottomLeft, ElbowChlorDosingBottomLeft, FreezeFittings, CoagTees, FreezeCoagTees, ChlorTees, FreezeChlorTees) otherwise
ManifoldValve_Script := stack(ManifoldCoagValveLayer, CdcCoagBallValve, RotateCdcCoagBallValve, ViewFront, ArrayCoagBallValve, MirrorCoagValves, ViewTop, CdcCoagBallValveAir, FreezeCoagValvesLayer, ManifoldChlorValveLayer, ViewTop, CdcChlorineBallValve, RotateCdcChlorineBallValve, ViewFront, ArrayChlorineBallValve, MirrorChlorineValves, ViewTop, CdcChlorineBallValveAir, FreezeChlorValvesLayer)
Manifold_Script := stack(ManifoldFitting_Script, ManifoldValve_Script)
# Dosing Tubes
L_CdcCoagTube = 1.26093 m
D_CdcCoag = 0.125 in
N_CdcCoagTubes = 1
L_CdcChlorineTube = 0.366254 m
D_CdcChlorine = 0.0625 in
N_CdcChlorineTubes = 2
DosingTubesLayer := layer_new("CdcDosingPlu", red)
CoagTube := PipeF(CoagDosingTube_Origin, L_CdcCoagTube, [0; 0]*deg, D_CdcCoag, PS_FlexTube)
ViewFront := view("f")
ArrayCoagTube := ArrayLast(max(N_CdcCoagTubes, 2), 1, B_DosingTubes)
ArrayCoagTube_test := ArrayLast(N_CdcCoagTubes + 1, 1, B_DosingTubes)
ViewTop := view("t")
ChlorineTube := PipeF(ChlorDosingTube_Origin, L_CdcChlorineTube, [0; 0]*deg, D_CdcChlorine, PS_FlexTube)
ArrayChlorineTube := ArrayLast(max(N_CdcChlorineTubes, 2), 1, B_DosingTubes)
ArrayChlorineTube_test := ArrayLast(N_CdcChlorineTubes + 1, 1, B_DosingTubes)
FreezeDosingTubes := FreezeLayer("CdcDosingPlu")
Dosing_Script := stack(DosingTubesLayer, CoagTube, ViewFront, ArrayCoagTube_test, ViewTop, ChlorineTube, ViewFront, ArrayChlorineTube_test, ViewTop, FreezeDosingTubes)
# Calibration Column Definitions
SF_CalCol := 1.25
Ti_Res := 1.25*min
H_CalCol := 30 cm
Q_CoagCalColMax := SF_CalCol*Q_CoagStock
Vol_CoagCalCol := Ti_Res*Q_CoagCalColMax
D_inCoagCCMin := sqrt(4*Vol_CoagCalCol/(π*H_CalCol)) = 1.21661 in
ND_CoagCalCol := NominalDiameter(D_inCoagCCMin, PS_Default)
D_inCoagCalCol := innerdiameter(ND_CoagCalCol, PS_Default) = 1.734 in
Q_ChlorCalColMax := SF_CalCol*Q_ChlorineStock
Vol_ChlorCalCol := Ti_Res*Q_ChlorCalColMax
D_inChlorCCMin := sqrt(4*Vol_ChlorCalCol/(π*H_CalCol)) = 0.702411 in
ND_ChlorCalCol := NominalDiameter(D_inChlorCCMin, PS_Default)
D_inChlorCalCol := innerdiameter(ND_ChlorCalCol, PS_Default) = 1.175 in
Q_FCCalColMax := SF_CalCol*Q_FiCoagStock
Vol_FCCalCol := Ti_Res*Q_FCCalColMax
D_inFCCCMin := sqrt(4*Vol_FCCalCol/(π*H_CalCol)) = 0.105362 in
ND_FCCalCol := NominalDiameter(D_inFCCCMin, PS_Default)
D_inFCCalCol := innerdiameter(ND_FCCalCol, PS_Default) = 1.175 in
R_Cylinder := .5 cm
# Calibration Column Origin Points
CoagCalCol_Origin := [
    ChemPlatform_Origin[0] + 1/2*L_EtChemPlatform;
    ChemPlatform_Origin[1] - ConRadius(ND_CoagCalCol) - T_MountingBoard;
    Z_CoagulantOutlet
]
CoagTopCap_Origin := [CoagCalCol_Origin[0]; CoagCalCol_Origin[1]; CoagCalCol_Origin[2] + H_CalCol]
ChlorCalCol_Origin := [
    ChemPlatform_Origin[0] + 1/2*L_EtChemPlatform - ConRadius(ND_CoagCalCol) - ConRadius(ND_ChlorCalCol) - 2*zc;
    ChemPlatform_Origin[1] - ConRadius(ND_CoagCalCol) - 2*zc;
    Z_CoagulantOutlet
]
ChlorTopCap_Origin := [ChlorCalCol_Origin[0]; ChlorCalCol_Origin[1]; ChlorCalCol_Origin[2] + H_CalCol]
# To draw the hole in the top cap, we are subtracting a cylinder from the top cap layer
CoagCylinder_Origin := [CoagCalCol_Origin[0]; CoagCalCol_Origin[1]; CoagCalCol_Origin[2] + H_CalCol/2]
ChlorCylinder_Origin := [ChlorCalCol_Origin[0]; ChlorCalCol_Origin[1]; ChlorCalCol_Origin[2] + H_CalCol/2]
# Calibration Column and Constant Head Tanks
MakeCalColLayer := layer_new("CdcCalColumnPlu", ltpurple)
MainCoagCalCol := PipeF(CoagCalCol_Origin, H_CalCol, [0; 90]*deg, ND_CoagCalCol, PS_Default)
MainChlorCalCol := PipeF(ChlorCalCol_Origin, H_CalCol, [0; 90]*deg, ND_ChlorCalCol, PS_Default)
CHT1 := ConstantHeadTankF(CHT_Origin, [90; 0; 90]*deg, D_CHT/2, H_CHT, T_CHTwall, .75*H_CHT, 1 in, 1 in, 1 in, 1 in)
CHT2 := ConstantHeadTankF(CHT2_Origin, [90; 0; 90]*deg, D_CHT/2, H_CHT, T_CHTwall, .75*H_CHT, 1 in, 1 in, 1 in, 1 in)
FreezeCalCol := FreezeLayer("CdcCalColumnPlu")
MakeCapsLayer := layer_new("CdcColumnCapsPlu", blue2)
CoagTopCap := CapF(CoagTopCap_Origin, [0; -90]*deg, ND_CoagCalCol)
CoagBottomCap := CapF(CoagTopCap_Origin - [0 m; 0 m; H_CalCol], [0; 90]*deg, ND_CoagCalCol)
ChlorTopCap := CapF(ChlorTopCap_Origin, [0; -90]*deg, ND_ChlorCalCol)
ChlorBottomCap := CapF(ChlorTopCap_Origin - [0 m; 0 m; H_CalCol], [0; 90]*deg, ND_ChlorCalCol)
FreezeCapsLayer := FreezeLayer("CdcColumnCapsPlu")
DrawCoagCylinder := CylinderF(CoagCylinder_Origin, R_Cylinder, H_CalCol, [0; 90]*deg)
DrawChlorCylinder := CylinderF(ChlorCylinder_Origin, R_Cylinder, H_CalCol, [0; 90]*deg)
LayCylinder := GroupAll("DeleteMe")
MakeHole := SubtractF(["CdcColumnCapsPlu"], "DeleteMe")
LayStand := layer_new("CdcCalColumnStand", yellow)
BoardDim_Vert := [
    2*ConRadius(ND_CoagCalCol) + 2*ConRadius(ND_ChlorCalCol) + 4*zc + 2*D_CHT + 1/6*L_EtChemPlatform;
    T_MountingBoard;
    H_CalCol + Z_CoagulantOutlet - Z_CdcFloatValveOrifice
]
BoardDim_Horiz := [BoardDim_Vert[0]; BoardDim_Vert[2]/(2*tan(60*deg)); 1.5*in]
VertBoard_Origin := [
    CoagCalCol_Origin[0] - ConRadius(ND_CoagCalCol) - 2*ConRadius(ND_ChlorCalCol) - 2*zc;
    CoagCalCol_Origin[1] + ConRadius(ND_CoagCalCol);
    Z_CdcFloatValveOrifice
]
FarCorner_VertBoard := BoardDim_Vert + VertBoard_Origin
HorizBoard_Origin := [
    VertBoard_Origin[0];
    VertBoard_Origin[1] + BoardDim_Vert[1];
    ChemPlatform_Origin[2] + ChemPlatform_Dimensions[2]
]
FarCorner_HorizBoard := BoardDim_Horiz + HorizBoard_Origin
BoardDim_Slant := [BoardDim_Vert[0]; 1.5 in; BoardDim_Vert[2]/(2*sin(60 deg))]
SlantBoard_Origin := FarCorner_HorizBoard
FarCorner_SlantBoard := SlantBoard_Origin + [-BoardDim_Slant[0]; -BoardDim_Slant[1]; BoardDim_Slant[2]]
MakeSlantBoard := BoxF(SlantBoard_Origin, FarCorner_SlantBoard, [0; 0; 30]*deg)
MakeVertBoard := BoxF(VertBoard_Origin, FarCorner_VertBoard, [0; 0; 0])
MakeHorizBoard := BoxF(HorizBoard_Origin, FarCorner_HorizBoard, [0; 0; 0])
RotateSupport := Rotate_All(VertBoard_Origin, 90 deg)
MoveSupport := MoveAll(VertBoard_Origin, VertBoard_Origin - [0 m; 2*ConRadius(ND_CoagCalCol); 0 m])
FreezeBoards := FreezeLayer("CdcCalColumnStand")
CdcCalColumn2_Script := stack(MakeCalColLayer, MainCoagCalCol, MainChlorCalCol, CHT1, CHT2, FreezeCalCol, MakeCapsLayer, CoagTopCap, CoagBottomCap, ChlorTopCap, ChlorBottomCap, FreezeCapsLayer, DrawCoagCylinder, DrawChlorCylinder, LayCylinder, MakeHole, LayStand, MakeSlantBoard, MakeVertBoard, MakeHorizBoard, FreezeBoards)
CdcCalColumn1_Script := stack(MakeCalColLayer, MainChlorCalCol, CHT1, FreezeCalCol, MakeCapsLayer, ChlorTopCap, ChlorBottomCap, FreezeCapsLayer, DrawChlorCylinder, CHT2, LayCylinder, MakeHole, LayStand, MakeSlantBoard, MakeVertBoard, MakeHorizBoard, FreezeBoards)
AC_Cdc2 := stack(Cdc2_Script, Dosing_Script, Manifold_Script, CdcCalColumn2_Script)
AC_Cdc1 := stack(Cdc1_Script, Dosing_Script, Manifold_Script, CdcCalColumn1_Script)
AC_Cdc := AC_Cdc2
Drawing := stack(EtTankScript, AC_Cdc, AC_ChemTanks)
AltDrawing := stack(EtTankScript, AC_Cdc1, AC_ChemTanks)
Test_Script := stack(Manifold_Script, Dosing_Script, EtTankScript)
# [component: inputs Test_Script]
