Q_Plant := 40*L/s
HL_FlocMax := 40 cm
H_SedSlopesToFlocWeirMin := 25 cm
T_FlocSlab := 15 cm
T_SedWall := 15 cm
T_SedDividingWall := 15 cm
T_SedChannelWall := 15 cm
T_FlocWall := 15 cm
T_FlocDividingWall := 15 cm
T_FiWall := 25 cm
T_FiBoxWall := 15 cm
T_PlantWall := 15 cm
T_PlantFloor := 20 cm
T_ChemSlab := 15 cm
T_DrainChannelWall := 15 cm
C_CoagDoseMax := 40*mg/L
C_ChlorDoseAve := 1*mg/L
# Mathcad to AutoCAD translators:
# [reference: MtoATranslators.xmcd]
# The wrapped MtoA translator contains the functions that the user will want to access. These functions will draw pieces with full functionality - specifying the location, dimension, and orientation of the object. Also, it contains layer control and subtraction capabilities for grouped objects.
# [reference: MtoATranslatorsWrapped.xmcd]
# Plant design calculations:
# [reference: ExpertInputs.xmcd]
# [reference: MathFunctions.xmcd]
# [reference: PipeDatabase.xmcd]
# [reference: MaterialsDatabase.xmcd]
# [reference: FluidsFunctions.xmcd]
# [reference: SedimentationTank.xmcd]
# [reference: LFOM.xmcd]
# [reference: FlocculatorEntranceTank.xmcd]
# [reference: StackedRapidSandFilter.xmcd]
# [reference: ChemicalDoseController_st587.xmcd]
# AutoCAD drawing functions:
# [reference: ChannelF.xmcd]
# [reference: PlumbingF.xmcd]
# [reference: TankF.xmcd]
# [reference: StairsF.xmcd]
# [reference: DrainChannelF.xmcd]
# AutoCAD script files:
# [reference: FlocculatorAC.xmcd]
# [reference: SedimentationTankAC.xmcd]
# [reference: EntranceTankCompactAC_st587.xmcd]
# [reference: StackedRapidSandFilterAC.xmcd]
# [reference: ChemStockTanksAC.xmcd]
# [reference: OperatorAccessAC_st587.xmcd]
ID(2 in, SDR_26) = 2.173 in
# Width and length of the chemical platform are defined in ChemStockTanksAC
ChemPlatform_Origin := [
    CoagTank_Origin[0] + R_CoagTank + T_ChemTankWall + S_ChemTankBorder - L_ChemPlatform;
    Et_Origin[1] + W_Et + T_PlantWall - W_ChemPlatform;
    CoagTank_Origin[2] - T_ChemTankWall - T_PlantWall
]
ChemPlatform_Dimensions := [L_ChemPlatform; W_ChemPlatform; T_PlantWall]
# Chemical Dose Controller
# Dimensions
# Length of the float pipe must fill both caps plus some.
L_CdcFloat := 2*(CapHeight(ND_EtFloat) - CapThickness(ND_EtFloat)) + 1 in
Z_FloatTop := Z_Walkway - HL_Lfom + 1/2*L_CdcFloat + CapThickness(ND_EtFloat) = 1.20821 m  # this is used in the future.  not sure why it cant be this
# The elevation of the float with the center of the float being at the bottom row of orifices of the LFOM.
L_Cable := Z_FloatTop + HL_Lfom - Z_FloatTop = 0.25 m
L_CableOrig := Z_EtTop + H_LeverHole - (ZW_EtMax + T_EtFloat/2)
Z_EtTop = 2.60817 m
# five gallons bucket dimensions for constant head tanks
ZW_EtMax + T_EtFloat/2 = 2.53317 m
H_LeverHole = 0.02645 m
D_CHT := 30/3*cm
Z_FloatTop = 1.20821 m
H_CHT := 37/3*cm
H_LeverHole = 0.02645 m
H_LeverHole = 0.02645 m
HL_Cdc = 0.2 m
Z_Walkway = 1.28358 m
T_CHTwall := 1/3*cm
HL_Lfom = 0.25 m
ND_DeliveryPipe := 1 in  # based on measurements in the lab and the system in Atima
HL_Lfom = 0.25 m
PS_FlexTube := 2
L_PVCBallValve := .1625 m/2
B_DosingTubes := max(TeeLength(ND_DeliveryPipe) + 2*SocketDepth(ND_DeliveryPipe), 2*ElbowRadius(ND_DeliveryPipe) + 2*SocketDepth(ND_DeliveryPipe))
T_MountingBoard := 1.5 in
L_CoagDeliveryPipe := L_CoagTube + 2*L_PVCBallValve + 2*ShortTeeLength(ND_DeliveryPipe) + ElbowRadius(ND_DeliveryPipe) + OR_Fitting(ND_DeliveryPipe)
L_ChlorineDeliveryPipe := L_ChlorTube + 2*L_PVCBallValve + 2*ShortTeeLength(ND_DeliveryPipe) + ElbowRadius(ND_DeliveryPipe) + OR_Fitting(ND_DeliveryPipe)
L_DosingConnectors := L_PVCBallValve + SocketDepth(ND_DeliveryPipe)
# Origin Points
S_EtFloat = 0.05 m
EtFloat_Origin := [
    Et_Origin[0] - L_Et + L_EtFrontWallToFloat + OR_Fitting(ND_EtFloat);
    Et_Origin[1] + W_Et/2;
    ZW_EtMax - T_EtFloat/2
] = [-5.70076; 10.105; 2.48317] m
LA_OriginOLD := [
    EtFloat_Origin[0] - OR_Fitting(ND_EtFloat) + S_Fitting;
    Et_Origin[1] + W_Et + T_FlocWall;
    Z_EtTop + D_LABOrigintoLAOriginZ/2
] = [-5.76903; 10.75; 2.62087] m
LA_Origin := [
    Et_Origin[0] - L_Et + L_EtFrontWallToFloat + OR_Fitting(ND_EtFloat) - OR_Fitting(ND_EtFloat) + S_Fitting;
    Et_Origin[1] + W_Et + T_FlocWall;
    Z_EtTop + D_LABOrigintoLAOriginZ/2
] = [-5.76903; 10.75; 2.62087] m  # the x and y coordinates of LA.Origin were changed to those of the DosingSubBox.Origin
DosingSubBox_Origin = [-5.81903; 10.75; 1.07358] m
[LA_Origin[0] - OR_Fitting(ND_EtFloat) - S_EtFloat/2; LA_Origin[1]; LA_Origin[2]]
LA2_Origin := [LA_Origin[0] + OR_Fitting(ND_EtFloat); LA_Origin[1]; LA_Origin[2]] = [-5.65076; 10.75; 2.62087] m
LADt_Center := [
    LA_Origin[0] - L_LAOriginToDtCenterX;
    LA_Origin[1] + L_LAOriginToDtY/2;
    LA_Origin[2] + L_LAOriginToDtZ + H_LeverArm
] = [-5.79803; 11.1406; 2.68917] m
[
    LA_Origin[0] - L_LAOriginToDtCenterX;
    LA_Origin[1] + L_LAOriginToDtY/2;
    LA_Origin[2] + L_LAOriginToDtZ + H_LeverArm
]
[
    LA2_Origin[0] - L_LAOriginToDtCenterX;
    LA2_Origin[1] - L_LAOriginToDtY/2;
    LA2_Origin[2] + L_LAOriginToDtZ + H_LeverArm
]
LA2Dt_Center := [
    LA2_Origin[0] + L_LAOriginToDtCenterX;
    LA2_Origin[1] + L_LAOriginToDtY/2;
    LA2_Origin[2] + L_LAOriginToDtZ + H_LeverArm
]
CHT_Origin := [
    ChemPlatform_Origin[0] + ChemPlatform_Dimensions[0] + T_PlantWall + 1/2*D_CHT;
    ChemPlatform_Origin[1] - 1/2*D_CHT + ChemPlatform_Dimensions[1] - T_PlantWall;
    ZW_CdcCht
] = [-7.78802; 10.55; 2.67587] m
CHT2_Origin := [CHT_Origin[0]; CHT_Origin[1] - 1.5*D_CHT; CHT_Origin[2]]
CHT3_Origin := [CHT_Origin[0]; CHT2_Origin[1] - 1.5*D_CHT; CHT_Origin[2]]
L_CdcLeverHoriz := (L_CdcLever^2 - HL_Lfom^2)^.5 = 0.433013 m
# L.CdcHeverHoriz is a fn created by serena to get the horizontal adjacent side of the lever arm
L_CdcLeverVert := (L_CdcLever^2 - L_CdcLeverHoriz^2)^.5 = 0.25 m
CHT4_Origin := [CHT_Origin[0]; CHT3_Origin[1] - 1.5*D_CHT; CHT_Origin[2]]
Float_Origin := [(LA_Origin[0] + LA2_Origin[0])/2; LA_Origin[1] - L_CdcLeverHoriz; ZW_EtMax - T_EtFloat/2] = [-5.70989; 10.317; 2.48317] m
[
    (LA_Origin[0] + LA2_Origin[0])/2;
    LA_Origin[1] - W_LeverArm/2 - L_CdcLever;
    Z_FloatTop - CapThickness(ND_EtFloat)
]
ZW_EtMax - T_EtFloat/2
Slider2_Origin := [
    LA2_Origin[0] - H_Slider + W_Slider;
    LA2_Origin[1] + L_LAOriginToDtY/2 - H_Slider - zc;
    LA2_Origin[2] + H_LeverArm + W_Slider
]
Slider1_Origin := [
    LA_Origin[0] - H_Slider + W_Slider;
    LA_Origin[1] + L_LAOriginToDtY/2 - H_Slider - zc;
    LA_Origin[2] + H_LeverArm + W_Slider
] = [-5.7817; 11.1147; 2.64947] m
N_TubesTriggerStack := 2
# The first case triggers when both N values are equalt to 1, in other words when there are
# two Coag dosing tubes and two Chlor dosing tubes. This case will stack the dosing manifolds.
ChlorDeliveryPipe_Origin :=
    if N_CoagTubes + N_ChlorTubes ≤ N_TubesTriggerStack
        [
            LA_Origin[0] + L_ChlorineDeliveryPipe + 2*(ElbowRadius(ND_DeliveryPipe) + SocketDepth(ND_DeliveryPipe));
            Et_Origin[1] - T_PlantWall - OR_Fitting(ND_DeliveryPipe);
            Z_Walkway + 1.5*OR_Fitting(ND_DeliveryPipe) + (N_CoagTubes + 2)*B_DosingTubes + ElbowRadius(ND_DeliveryPipe) + SocketDepth(ND_DeliveryPipe)
        ]
    if L_CoagDeliveryPipe ≤ L_ChlorineDeliveryPipe
        [
            LA_Origin[0] + L_ChlorineDeliveryPipe;
            Et_Origin[1] - T_PlantWall - OR_Fitting(ND_DeliveryPipe);
            Z_Walkway + 1.5*OR_Fitting(ND_DeliveryPipe)
        ]
    otherwise
        [
            LA_Origin[0] + L_ChlorineDeliveryPipe;
            Et_Origin[1] - T_PlantWall - OR_Fitting(ND_DeliveryPipe);
            Z_Walkway + 1.5*OR_Fitting(ND_DeliveryPipe) - ((-ElbowRadius(ND_DeliveryPipe) - OR_Fitting(ND_DeliveryPipe)/2 + 2*SocketDepth(ND_DeliveryPipe) + .5*TeeLength(ND_DeliveryPipe)) - S_Fitting - 2*OR_Fitting(ND_DeliveryPipe))
        ]
# The second case will nest the dosing manifolds with the chlorine delivery pipe on the bottom.
# The third case will nest the dosing manifolds with the coagulant delivery pipe on the bottom.
ChlorDosingTube_Origin :=
    if N_CoagTubes + N_ChlorTubes ≤ N_TubesTriggerStack
        ChlorDeliveryPipe_Origin + [
            -L_PVCBallValve - SocketDepth(ND_DeliveryPipe);
            0 m;
            ElbowRadius(ND_DeliveryPipe) + 2*SocketDepth(ND_DeliveryPipe) + .5*TeeLength(ND_DeliveryPipe)
        ]
    otherwise
        ChlorDeliveryPipe_Origin + [
            -L_PVCBallValve - SocketDepth(ND_DeliveryPipe);
            0 m;
            ElbowRadius(ND_DeliveryPipe) + 2*SocketDepth(ND_DeliveryPipe) + .5*TeeLength(ND_DeliveryPipe) + (N_CoagTubes + 1)*B_DosingTubes + L_PVCBallValve
        ]
OffsetCoagChlor :=
    if N_CoagTubes + N_ChlorTubes ≤ N_TubesTriggerStack
        [
            0 m;
            0 m;
            -((N_CoagTubes + 2)*B_DosingTubes + ElbowRadius(ND_DeliveryPipe) + SocketDepth(ND_DeliveryPipe))
        ]
    if L_CoagDeliveryPipe ≤ L_ChlorineDeliveryPipe
        [
            S_Fitting + OR_Fitting(ND_DeliveryPipe)/2;
            0 m;
            (ElbowRadius(ND_DeliveryPipe) + OR_Fitting(ND_DeliveryPipe)/2 + 2*SocketDepth(ND_DeliveryPipe) + .5*TeeLength(ND_DeliveryPipe)) - S_Fitting - 2*OR_Fitting(ND_DeliveryPipe)
        ]
    otherwise
        [
            -S_Fitting - OR_Fitting(ND_DeliveryPipe)/2;
            0 m;
            (-ElbowRadius(ND_DeliveryPipe) - OR_Fitting(ND_DeliveryPipe)/2 + 2*SocketDepth(ND_DeliveryPipe) + .5*TeeLength(ND_DeliveryPipe)) - S_Fitting - 2*OR_Fitting(ND_DeliveryPipe)
        ]
CoagDeliveryPipe_Origin := OffsetCoagChlor + [
    LA_Origin[0] + L_CoagDeliveryPipe;
    Et_Origin[1] - T_PlantWall - OR_Fitting(ND_DeliveryPipe);
    ChlorDeliveryPipe_Origin[2]
]
LeaveSpaceForChlor :=
    2*SocketDepth(ND_DeliveryPipe) if N_CoagTubes + N_ChlorTubes ≤ N_TubesTriggerStack or L_CoagDeliveryPipe ≤ L_ChlorineDeliveryPipe
    3*SocketDepth(ND_DeliveryPipe) otherwise
CoagDosingTube_Origin := CoagDeliveryPipe_Origin + [
    -L_PVCBallValve - SocketDepth(ND_DeliveryPipe);
    0 m;
    ElbowRadius(ND_DeliveryPipe) + LeaveSpaceForChlor + .5*TeeLength(ND_DeliveryPipe)
]
# Lever Arms and Drop Tubes
AN_LA := asin(HL_Lfom/L_CdcLever)/deg = 30
MakeCdcLayer := layer_new("CdcLayer", ltgrey)
# Original LArm1 Origins
LArm1 := BoxF([LA_Origin[0] + 1/8*in; LA_Origin[1] - L_CdcLever; LA_Origin[2]], [LA_Origin[0]; LA_Origin[1] + L_CdcLever; LA_Origin[2] + H_LeverArm], [0; 0; 0]*deg)
# The L brackets which connect the lever arms to the entrance tank are drawn here.
[LA_Origin[0] + 1/8*in; LA_Origin[1] - L_CdcLever; LA_Origin[2]], [LA_Origin[0]; LA_Origin[1] + L_CdcLever; LA_Origin[2] + H_LeverArm]
LBracketLA1 := LBracket2F([
    LA_Origin[0] - L_LArmBar/2;
    LA_Origin[1] - L_LArmBar/2;
    LA_Origin[2] + L_LBracket/2 - L_LBracket/8 - 3/4*L_LBracket
], W_LBracket, L_LBracket, T_LBracket, [-90; 0; 0]*deg)
[
    LA_Origin[0] - L_LArmBar/2;
    LA_Origin[1] + L_LArmBar/2;
    LA_Origin[2] + L_LBracket/2 - L_LBracket/8 - 3/4*L_LBracket
]
DropTube1 := PipeF(LADt_Center, L_DropTube, [-AN_LA; -90]*deg, ND_DropTube, SDR_13.5)
LArm2 := BoxF([LA2_Origin[0] + 1/8*in; LA2_Origin[1] - L_CdcLever; LA2_Origin[2]], [LA2_Origin[0]; LA2_Origin[1] + L_CdcLever; LA2_Origin[2] + H_LeverArm], [0; 0; 0]*deg)
LBracketLA2 := LBracket2F([
    LA2_Origin[0] - L_LArmBar/2;
    LA2_Origin[1] - L_LArmBar/2;
    LA_Origin[2] + L_LBracket/2 - L_LBracket/8 - 3/4*L_LBracket
], W_LBracket, L_LBracket, T_LBracket, [-90; 0; 0]*deg)
DropTube2 := PipeF(LA2Dt_Center, L_DropTube, [-AN_LA; -90]*deg, ND_DropTube, SDR_13.5)
[
    LA2_Origin[0] - L_LArmBar/2;
    LA2_Origin[1] + L_LArmBar/2;
    LA_Origin[2] + L_LBracket/2 - L_LBracket/8 - 3/4*L_LBracket
] = [-5.70156; 10.8008; 2.60658] m
FreezeCdcLayer := FreezeLayer("CdcLayer")
RotateLeverArm3D := Rotate3DLast([LA_Origin[1]; LA_Origin[2]; LA_Origin[0]], "z", -AN_LA*deg)
ThawCdcLayer := ThawMultiple(["CdcLayer"])
LBracketLA1, LBracketLA2
LeverArmCHT2_Script := stack(MakeCdcLayer, LArm1, LArm2, DropTube1, DropTube2, FreezeCdcLayer, ThawCdcLayer, view("r"), RotateLeverArm3D, view("t"), FreezeCdcLayer)
LeverArmCHT2_ScriptNoRotation := stack(MakeCdcLayer, LArm1, LArm2, DropTube1, DropTube2, LBracketLA1, LBracketLA2, FreezeCdcLayer)
LeverArmCHT1_Script := stack(MakeCdcLayer, LArm1, DropTube1, LBracketLA1, FreezeCdcLayer, ThawCdcLayer, view("r"), RotateLeverArm3D, view("t"), FreezeCdcLayer)
# [component: inputs LeverArmCHT2_Script]
LeverArmCHT1_ScriptNoRotation := stack(MakeCdcLayer, LArm1, DropTube1, LBracketLA1, FreezeCdcLayer)
# Connecting bars, Cylinders and Float Cable
ConnectCylinderLayer := layer_new("CdcConnectCylinder", ltgrey)
D_LeverArmConnectingCylinder1 := 1 in
D_LeverArmConnectingCylinder4 := 2 in
D_LeverArmConnectingCylinder2 := 0.5 in
L_LeverArmPivottoConnectingCylinder2 := 6 cm
L_LeverArmConnectingCylinder2toConnectingCylinder3 := 9.5 cm
T_LeverArmBar := 1/8*in
L_PivotBox := 2 in
L_LeverArmMountingPlate := 6 in
W_LeverArmMountingPlate := 0.5 cm
W_PivotBox := 1 in
H_LeverArmBar := 1 in
H_LeverArmMountingPlate := 2 in
H_PivotBox := 1 in
L_LeverArmInnerBar := 7 in
PivotBox_Origin := [
    LA_Origin[0] + OR_Fitting(ND_EtFloat)/3 - T_LeverArmBar;
    LA_Origin[1] + W_PivotBox/2;
    LA_Origin[2] + H_PivotBox
]
ConnectingCylinder1_LeverArm := CylinderSUBF([
    LA_Origin[0] + T_LeverArmBar;
    LA_Origin[1] - L_CdcLever + D_LeverArmConnectingCylinder1/2;
    LA_Origin[2] + H_LeverArm/2
], D_LeverArmConnectingCylinder1/2, OR_Fitting(ND_EtFloat), [0; 180]*deg, ["CdcLayer"])  # Top most cylinder. Connected to float. Thickest
# Bottom most cylinder.
ConnectingCylinder4_LeverArm := CylinderSUBF([
    LA_Origin[0] + T_LeverArmBar;
    LA_Origin[1] + L_CdcLever - D_LeverArmConnectingCylinder4/2;
    LA_Origin[2] + H_LeverArm/2
], D_LeverArmConnectingCylinder4/2, OR_Fitting(ND_EtFloat), [0; 180]*deg, ["CdcLayer"])
LarmBar1 := CylinderSUBF([LA_Origin[0] + L_LArmBar/2; LA_Origin[1] - L_LArmBar/2 - W_LBracket/2; LA_Origin[2] + L_LBracket/2], R_LArmBar, L_LArmBar, [0; 0]*deg, ["CdcLayer"])
[LA_Origin[0] + L_LArmBar/2; LA_Origin[1] + L_LArmBar/2 - W_LBracket/2; LA_Origin[2] + L_LBracket/2]
ConnectingCylinder2_LeverArm := CylinderSUBF([
    LA_Origin[0] + T_LeverArmBar;
    LA_Origin[1] + L_LeverArmPivottoConnectingCylinder2;
    LA_Origin[2] + H_LeverArm/2
], D_LeverArmConnectingCylinder2/2, OR_Fitting(ND_EtFloat), [0; 180]*deg, ["CdcLayer"])  # Cylinder closest to the pivot point
# lambars are the bars that connect the lever arms to the L-brackets
LarmBar2 := CylinderSUBF([
    LA2_Origin[0] + L_LArmBar/2;
    LA2_Origin[1] - L_LArmBar/2 - W_LBracket/2;
    LA2_Origin[2] + L_LBracket/2
], R_LArmBar, L_LArmBar, [0; 0]*deg, ["CdcLayer"])
ConnectingCylinder3_LeverArm := CylinderSUBF([
    LA_Origin[0] + T_LeverArmBar;
    LA_Origin[1] + L_LeverArmPivottoConnectingCylinder2 + L_LeverArmConnectingCylinder2toConnectingCylinder3;
    LA_Origin[2] + H_LeverArm/2
], D_LeverArmConnectingCylinder2/2, OR_Fitting(ND_EtFloat), [0; 180]*deg, ["CdcLayer"])
[
    LA2_Origin[0] + L_LArmBar/2;
    (LA2_Origin[1] + L_LArmBar/2) - W_LBracket/2;
    LA2_Origin[2] + L_LBracket/2
]
PivotBox_LeverArm := BoxF(PivotBox_Origin, [PivotBox_Origin[0] + L_PivotBox; PivotBox_Origin[1] - W_PivotBox; PivotBox_Origin[2] - H_PivotBox], [0; 0; 0]*deg)
[LA_Origin[0] + H_LeverArm; LA2_Origin[1] + L_CdcLever - 4*zc; LA_Origin[2] + 4*W_LeverArm]
ConnectionCylinder2 := CylinderSUBF([LA2_Origin[0] - H_LeverArm; LA2_Origin[1] - L_CdcLever - 4*zc; LA_Origin[2] + 4*W_LeverArm], D_Cable, .5*L_CdcLever, [0; 0]*deg, ["CdcLayer"])
T_LeverArmBar := 1/8*in
MountingPlate_LeverArm := BoxF(PivotBox_Origin, [
    PivotBox_Origin[0] + H_LeverArmMountingPlate;
    PivotBox_Origin[1] + W_LeverArmMountingPlate;
    PivotBox_Origin[2] - L_LeverArmMountingPlate
], [0; 0; 0]*deg)
H_LeverArmBar := 1 in
L_LeverArmInnerBar := 7 in
InnerBar1_LeverArm := BoxF([PivotBox_Origin[0]; PivotBox_Origin[1] - W_PivotBox; PivotBox_Origin[2]], [
    PivotBox_Origin[0] - T_LeverArmBar;
    PivotBox_Origin[1] + L_LeverArmInnerBar;
    PivotBox_Origin[2] - H_LeverArmBar
], [0; 0; 0]*deg)
InnerBar2_LeverArm := BoxF([PivotBox_Origin[0] + L_PivotBox; PivotBox_Origin[1] - W_PivotBox; PivotBox_Origin[2]], [
    PivotBox_Origin[0] + L_PivotBox + T_LeverArmBar;
    PivotBox_Origin[1] + L_LeverArmInnerBar;
    PivotBox_Origin[2] - H_LeverArmBar
], [0; 0; 0]*deg)
FloatCable := CylinderF([
    LA_Origin[0] + OR_Fitting(ND_EtFloat)/2;
    LA_Origin[1] - L_CdcLever + D_LeverArmConnectingCylinder1/2;
    LA_Origin[2] + H_LeverArmBar/2
], D_Cable, (LA_Origin[2] - Float_Origin[2]) - T_EtFloat + L_CdcLeverVert, [-AN_LA; -90]*deg)
FreezeConnectCylinderLayer := FreezeLayer("CdcConnectCylinder")
LarmBar1, LarmBar2, ConnectionCylinder2
ThawConnectCylinderLayer := ThawMultiple(["CdcConnectCylinder"])
ConnectCyl2_Script := stack(ConnectCylinderLayer, ConnectingCylinder1_LeverArm, PivotBox_LeverArm, MountingPlate_LeverArm, InnerBar1_LeverArm, InnerBar2_LeverArm, ConnectingCylinder2_LeverArm, ConnectingCylinder3_LeverArm, ConnectingCylinder4_LeverArm, FloatCable, FreezeConnectCylinderLayer, ThawConnectCylinderLayer, view("r"), RotateLeverArm3D, view("t"), FreezeConnectCylinderLayer)
ConnectCyl1_Script := stack(ConnectCylinderLayer, LarmBar1, FloatCable, FreezeConnectCylinderLayer)
# Sliders
SliderLayer := layer_new("CdcSliders", dkgrey)
Slider2FirstSide := BoxF(Slider2_Origin, [Slider2_Origin[0] + L_Slider; Slider2_Origin[1] + W_Slider; Slider2_Origin[2] - H_Slider], [90; 0; 0]*deg)
Slider1FirstSide := BoxF(Slider1_Origin, [Slider1_Origin[0] + L_Slider; Slider1_Origin[1] + W_Slider; Slider1_Origin[2] - H_Slider], [90; 0; 0]*deg)
Slider1TopSide := BoxF(Slider1_Origin, [Slider1_Origin[0] + H_Slider; Slider1_Origin[1] + L_Slider; Slider1_Origin[2] - W_Slider], [0; 0; 0]*deg)
Slider2TopSide := BoxF(Slider2_Origin, [Slider2_Origin[0] + H_Slider; Slider2_Origin[1] + L_Slider; Slider2_Origin[2] - W_Slider], [0; 0; 0]*deg)
Slider2SecondSide := BoxF([Slider2_Origin[0] + H_Slider; Slider2_Origin[1]; Slider2_Origin[2]], [
    Slider2_Origin[0] + H_Slider + W_Slider;
    Slider2_Origin[1] + L_Slider;
    Slider2_Origin[2] - H_Slider
], [0; 0; 0]*deg)
Slider1SecondSide := BoxF([Slider1_Origin[0] + H_Slider; Slider1_Origin[1]; Slider1_Origin[2]], [
    Slider1_Origin[0] + H_Slider + W_Slider;
    Slider1_Origin[1] + L_Slider;
    Slider1_Origin[2] - H_Slider
], [0; 0; 0]*deg)
FreezeSliders := FreezeLayer("CdcSliders")
ThawSliders := ThawMultiple(["CdcSliders"])
FreezeSlidersLayer, ThawSlidersLayer, view("r"), RotateLeverArm3D, view("t"), FreezeSlidersLayer
Sliders2_Script := stack(SliderLayer, Slider1FirstSide, Slider2FirstSide, Slider1TopSide, Slider2TopSide, Slider1SecondSide, Slider2SecondSide, FreezeSliders, ThawSliders, view("r"), RotateLeverArm3D, view("t"), FreezeSliders)
Sliders1_Script := stack(SliderLayer, Slider1FirstSide, Slider1TopSide, Slider1SecondSide, FreezeSliders)
# Float
EtFloatLayer := layer_new("EtFloat", red)
SelectEtFloat := SelectLayer("EtFloat")
EtFloatFrz := FreezeLayer("EtFloat")
FloatCapsLayer := layer_new("CdcFloatCapPlu", green)
CdcFloatCapTop := CapF(Float_Origin, [0; -90]*deg, ND_EtFloat)  # this was taken from entrance  tank ac
EtFloat := CylinderF(Float_Origin, OR_Fitting(ND_EtFloat), T_EtFloat, [0; 90]*deg)
EtFloatScript := stack(EtFloatLayer, EtFloat, EtFloatFrz)
CdcFloatCapBottom := CapF([Float_Origin[0]; Float_Origin[1]; Float_Origin[2] - L_CdcFloat], [0; 90]*deg, ND_EtFloat)
FreezeFloatCaps := FreezeLayer("CdcFloatCapPlu")
FloatPipeLayer := layer_new("CdcFloatPipePlu", blue)
CdcFloatPipe := PipeF(Float_Origin, L_CdcFloat, [0; -90]*deg, ND_EtFloat, SDR_41)
FreezeFloatPipe := FreezeLayer("CdcFloatPipePlu")
PlumbingLayer := stack(FloatCapsLayer, CdcFloatCapTop, CdcFloatCapBottom, FreezeFloatCaps, FloatPipeLayer, CdcFloatPipe, FreezeFloatPipe)
Cdc2_Script := stack(LeverArmCHT2_Script, ConnectCyl2_Script, Sliders2_Script, EtFloatScript)
leverwithbars := stack(LeverArmCHT2_Script, ConnectCyl2_Script, Sliders2_Script)
Cdc2_ScriptOLD := stack(LeverArmCHT2_Script, ConnectCyl2_Script, Sliders2_Script, PlumbingLayer)
Cdc1_Script := stack(LeverArmCHT1_Script, ConnectCyl1_Script, Sliders1_Script, EtFloatScript)
# [component: inputs leverwithbars]
Cdc1_ScriptOLD := stack(LeverArmCHT1_Script, ConnectCyl1_Script, Sliders1_Script, PlumbingLayer)
# Manifold
CoagManifoldPluLayer := layer_new("CoagManifoldPlu", blue)
CoagConnectorPipe := PipeF(CoagDosingTube_Origin + [L_DosingConnectors + ShortTeeLength(ND_DeliveryPipe); 0 m; 0.5*TeeLength(ND_DeliveryPipe)], 2*SocketDepth(ND_DeliveryPipe), [0; 90]*deg, ND_DeliveryPipe, SDR_13.5)
ArrayCoagConnectorPipe := ArrayLast(N_CoagTubes + 1, 1, B_DosingTubes)
MirrorCoagConnectorPipe := Mirror3dAll("yz", [
    CoagDosingTube_Origin[0] - .5*L_TubeStockToCHEst;
    CoagDosingTube_Origin[1];
    CoagDosingTube_Origin[2] + 1/4*H_Et + ShortTeeLength(ND_DeliveryPipe) + .5*ND_DeliveryPipe
], "n")
CoagDeliveryConnectorPipe := PipeF(CoagDosingTube_Origin + [
    L_DosingConnectors + ShortTeeLength(ND_DeliveryPipe);
    0 m;
    -0.5*TeeLength(ND_DeliveryPipe) - 2*SocketDepth(ND_DeliveryPipe)
], 2*SocketDepth(ND_DeliveryPipe), [0; 90]*deg, ND_DeliveryPipe, SDR_13.5)
CoagDeliveryPipe := PipeF(CoagDeliveryPipe_Origin, L_CoagDeliveryPipe, [0; 0]*deg, ND_DeliveryPipe, SDR_13.5)
FreezeCoagManifoldPlu := FreezeLayer("CoagManifoldPlu")
CoagManifoldPluLongLayer := layer_new("CoagManifoldPluLong", blue)
L_CoagLongConnectorPipe := CoagDosingTube_Origin[2] - CoagDeliveryPipe_Origin[2] - .5*TeeLength(ND_DeliveryPipe) - ElbowRadius(ND_DeliveryPipe)
CoagConnectorPipeLong := PipeF(CoagDosingTube_Origin + [L_DosingConnectors + ShortTeeLength(ND_DeliveryPipe); 0 m; -.5*TeeLength(ND_DeliveryPipe)], L_CoagLongConnectorPipe, [0; -90]*deg, ND_DeliveryPipe, SDR_13.5)
FreezeCoagManifoldPluLongLayer := FreezeLayer("CoagManifoldPluLong")
ChlorManifoldPluLayer := layer_new("ChlorManifoldPlu", blue)
ChlorConnectorPipe := PipeF(ChlorDosingTube_Origin + [L_DosingConnectors + ShortTeeLength(ND_DeliveryPipe); 0 m; .5*TeeLength(ND_DeliveryPipe)], 2*SocketDepth(ND_DeliveryPipe), [0; 90]*deg, ND_DeliveryPipe, SDR_13.5)
ArrayChlorConnectorPipe := ArrayLast(N_ChlorTubes + 1, 1, B_DosingTubes)
MirrorChlorConnectorPipe := Mirror3dAll("yz", [
    ChlorDosingTube_Origin[0] - .5*L_ChlorTube;
    ChlorDosingTube_Origin[1];
    ChlorDosingTube_Origin[2] + 1/4*H_Et + ShortTeeLength(ND_DeliveryPipe) + .5*ND_DeliveryPipe
], "n")
L_ChlorLongConnectorPipe :=
    2*SocketDepth(ND_DeliveryPipe) if N_CoagTubes + N_ChlorTubes ≤ N_TubesTriggerStack
    ChlorDosingTube_Origin[2] - ChlorDeliveryPipe_Origin[2] - .5*TeeLength(ND_DeliveryPipe) - ElbowRadius(ND_DeliveryPipe) if L_ChlorineDeliveryPipe > L_CoagDeliveryPipe + 2*(ElbowRadius(ND_DeliveryPipe) + SocketDepth(ND_DeliveryPipe))
    max(ChlorDosingTube_Origin[2] - ChlorDeliveryPipe_Origin[2] - .5*TeeLength(ND_DeliveryPipe) - ElbowRadius(ND_DeliveryPipe) - (2*sin(45 deg)*(2*ElbowRadius(ND_DeliveryPipe) + 2*SocketDepth(ND_DeliveryPipe)) + (N_ChlorTubes + 1)*B_DosingTubes + sin(45 deg)*(1 - tan(22.5 deg))*ElbowRadius(ND_DeliveryPipe) + SocketDepth(ND_DeliveryPipe)), 2*SocketDepth(ND_DeliveryPipe)) otherwise
ChlorConnectorPipeLong := PipeF(ChlorDosingTube_Origin + [L_DosingConnectors + ShortTeeLength(ND_DeliveryPipe); 0 m; -.5*TeeLength(ND_DeliveryPipe)], L_ChlorTube, [0; -90]*deg, ND_DeliveryPipe, SDR_13.5)
ChlorElbowConnectorPipeBottom := PipeF(ChlorDeliveryPipe_Origin + [
    ElbowRadius(ND_DeliveryPipe);
    -sin(45 deg)*ElbowRadius(ND_DeliveryPipe);
    sin(45 deg)*ElbowRadius(ND_DeliveryPipe)
], 2*SocketDepth(ND_DeliveryPipe), [45; 90]*deg, ND_DeliveryPipe, SDR_13.5)
L_ChlorBridgeConnectorPipe := ChlorDosingTube_Origin[2] - ChlorDeliveryPipe_Origin[2] - .5*TeeLength(ND_DeliveryPipe) - L_ChlorTube - sin(45 deg)*(4*ElbowRadius(ND_DeliveryPipe) + 4*SocketDepth(ND_DeliveryPipe) + (1 - tan(22.5 deg))*ElbowRadius(ND_DeliveryPipe))
ChlorBridgeConnectorPipe := PipeF(ChlorDeliveryPipe_Origin + [
    ElbowRadius(ND_DeliveryPipe);
    -(sin(45 deg)*(ElbowRadius(ND_DeliveryPipe) + 2*SocketDepth(ND_DeliveryPipe)) + (1 - sin(45 deg))*ElbowRadius(ND_DeliveryPipe));
    sin(45 deg)*(ElbowRadius(ND_DeliveryPipe) + 2*SocketDepth(ND_DeliveryPipe)) + sin(45 deg)*ElbowRadius(ND_DeliveryPipe)
], L_ChlorBridgeConnectorPipe, [0; 90]*deg, ND_DeliveryPipe, SDR_13.5)
ChlorElbowConnectorPipeTop := PipeF(ChlorDosingTube_Origin + [
    L_DosingConnectors + ShortTeeLength(ND_DeliveryPipe);
    -sin(45 deg)*(2*SocketDepth(ND_DeliveryPipe) + (1 - tan(22.5 deg))*ElbowRadius(ND_DeliveryPipe)) - (1 - sin(45 deg))*ElbowRadius(ND_DeliveryPipe);
    -.5*TeeLength(ND_DeliveryPipe) - L_ChlorTube - sin(45 deg)*(2*SocketDepth(ND_DeliveryPipe) + (1 - tan(22.5 deg))*ElbowRadius(ND_DeliveryPipe) + ElbowRadius(ND_DeliveryPipe))
], 2*SocketDepth(ND_DeliveryPipe) + (1 - tan(22.5 deg))*ElbowRadius(ND_DeliveryPipe), [-45; 90]*deg, ND_DeliveryPipe, SDR_13.5)
ChlorDeliveryConnectorPipe := PipeF(ChlorDosingTube_Origin + [
    L_DosingConnectors + ShortTeeLength(ND_DeliveryPipe);
    0 m;
    -0.5*TeeLength(ND_DeliveryPipe) - 2*SocketDepth(ND_DeliveryPipe)
], 2*SocketDepth(ND_DeliveryPipe), [0; 90]*deg, ND_DeliveryPipe, SDR_13.5)
ChlorineDeliveryPipe := PipeF(ChlorDeliveryPipe_Origin, L_ChlorineDeliveryPipe, [0; 0]*deg, ND_DeliveryPipe, SDR_13.5)
FreezeChlorManifoldPlu := FreezeLayer("ChlorManifoldPlu")
ManifoldFittingsLayer := layer_new("CdcManifoldFittings", green)
ElbowCoagCHT := ElbowF(CoagDeliveryPipe_Origin + [-L_CoagDeliveryPipe; 0 m; 0 m], [90; 0; -90]*deg, ND_DeliveryPipe, SDR_13.5)
ElbowChlorCHT := ElbowF(ChlorDeliveryPipe_Origin + [-L_ChlorineDeliveryPipe; 0 m; 0 m], [90; 0; -90]*deg, ND_DeliveryPipe, SDR_13.5)
ElbowCoagDosing := ElbowF(CoagDeliveryPipe_Origin, [-90; 0; 90]*deg, ND_DeliveryPipe, SDR_13.5)
Angle_Elbow90ChlorDosing :=
    [-90; 0; 90]*deg if N_CoagTubes + N_ChlorTubes ≤ N_TubesTriggerStack or L_ChlorineDeliveryPipe > L_CoagDeliveryPipe + 2*(ElbowRadius(ND_DeliveryPipe) + SocketDepth(ND_DeliveryPipe))
    [-90; 0; 135]*deg otherwise
Elbow90ChlorDosing := ElbowF(ChlorDeliveryPipe_Origin, Angle_Elbow90ChlorDosing, ND_DeliveryPipe, SDR_13.5)
Elbow45ChlorDosingBottom := Elbow45F(ChlorDeliveryPipe_Origin + [
    ElbowRadius(ND_DeliveryPipe);
    -(ElbowRadius(ND_DeliveryPipe) + 2*sin(45 deg)*SocketDepth(ND_DeliveryPipe));
    sin(45 deg)*(2*ElbowRadius(ND_DeliveryPipe) + 2*SocketDepth(ND_DeliveryPipe))
], [0; 90; -90]*deg, ND_DeliveryPipe, SDR_13.5)
Elbow45ChlorDosingMiddle := Elbow45F(ChlorDosingTube_Origin + [
    L_DosingConnectors + ShortTeeLength(ND_DeliveryPipe);
    -sin(45 deg)*(2*SocketDepth(ND_DeliveryPipe) + (1 - tan(22.5 deg))*ElbowRadius(ND_DeliveryPipe)) - (1 - sin(45 deg))*ElbowRadius(ND_DeliveryPipe);
    -.5*TeeLength(ND_DeliveryPipe) - L_ChlorTube - sin(45 deg)*(2*SocketDepth(ND_DeliveryPipe) + (1 - tan(22.5 deg))*ElbowRadius(ND_DeliveryPipe) + ElbowRadius(ND_DeliveryPipe))
], [-135; 90; 0]*deg, ND_DeliveryPipe, SDR_13.5)
Elbow45ChlorDosingTop := Elbow45F(ChlorDosingTube_Origin + [
    L_DosingConnectors + ShortTeeLength(ND_DeliveryPipe);
    0 m;
    -.5*TeeLength(ND_DeliveryPipe) - L_ChlorTube
], [90; -90; 0]*deg, ND_DeliveryPipe, SDR_13.5)
# Option 1:Eliminate the top right elbow and modify the tee code and add a ball valve on top
# option 2: repla90 the top right elbow with a tee and ball valve without changing the tee code
ElbowCoagDosingBottomLeft := ElbowF(CoagDosingTube_Origin + [-L_CoagTube - L_DosingConnectors; 0 m; 0 m], [90; 0; -90]*deg, ND_DeliveryPipe, SDR_13.5)
ElbowChlorDosingBottomLeft := ElbowF(ChlorDosingTube_Origin + [-L_ChlorTube - L_DosingConnectors; 0 m; 0 m], [90; 0; -90]*deg, ND_DeliveryPipe, SDR_13.5)
TeeCoagDosingTopRight := TeeF(CoagDosingTube_Origin + [L_DosingConnectors; 0 m; B_DosingTubes*N_CoagTubes], [90; 0; -90]*deg, ND_DeliveryPipe, SDR_13.5)
TeeChlorDosingTopRight := TeeF(ChlorDosingTube_Origin + [L_DosingConnectors; 0 m; B_DosingTubes*N_ChlorTubes], [90; 0; -90]*deg, ND_DeliveryPipe, SDR_13.5)
FreezeFittings := FreezeLayer("CdcManifoldFittings")
ManifoldCoagTeeLayer := layer_new("CdcCoagTees", green)
CoagTees :=
    CoagTeeStack ← layer_new("CdcCoagTees", green)
    for i ∈ 0 .. max(N_CoagTubes - 1, 0)
        CoagTeeStack ← stack(CoagTeeStack, TeeF(CoagDosingTube_Origin + [L_DosingConnectors; 0 m; B_DosingTubes*i], [90; 0; 90]*deg, ND_DeliveryPipe, SDR_13.5))
        CoagTeeStack ← stack(CoagTeeStack, TeeF(CoagDosingTube_Origin + [-L_CoagTube - L_DosingConnectors; 0 m; B_DosingTubes*(i + 1)], [-90; 0; 90]*deg, ND_DeliveryPipe, SDR_13.5))
        i ← i + 1
    return CoagTeeStack
# Changed from N.CdcCoagTubes-2 to N.CdcCoagTubes-1
FreezeCoagTees := FreezeLayer("CdcCoagTees")
ChlorTees :=
    ChlorTeeStack ← layer_new("CdcChlorTees", green)
    for i ∈ 0 .. max(N_ChlorTubes - 1, 0)
        ChlorTeeStack ← stack(ChlorTeeStack, TeeF(ChlorDosingTube_Origin + [L_DosingConnectors; 0 m; B_DosingTubes*i], [90; 0; 90]*deg, ND_DeliveryPipe, SDR_13.5))
        ChlorTeeStack ← stack(ChlorTeeStack, TeeF(ChlorDosingTube_Origin + [-L_ChlorTube - L_DosingConnectors; 0 m; B_DosingTubes*(i + 1)], [-90; 0; 90]*deg, ND_DeliveryPipe, SDR_13.5))
        i ← i + 1
    return ChlorTeeStack
FreezeChlorTees := FreezeLayer("CdcChlorTees")
ManifoldCoagValveLayer := layer_new("CdcCoagManifoldValves", ltgrey)
CdcCoagBallValve := insertdwg("https://confluence.cornell.edu/download/attachments/173604905/PvcBallValve+Scaled.dwg", CoagDosingTube_Origin + [L_PVCBallValve; 0 m; 0 m], ND_DeliveryPipe/(2 in), ND_DeliveryPipe/(2 in), 0 deg)
RotateCdcCoagBallValve := Rotate3DLast(CoagDosingTube_Origin + [L_PVCBallValve; 0 m; 0 m], "y", -90 deg)
ArrayCoagBallValve := ArrayLast(N_CoagTubes + 1, 1, B_DosingTubes)
MirrorCoagValves := Mirror3dAll("yz", [
    CoagDosingTube_Origin[0] - .5*L_CoagTube;
    CoagDosingTube_Origin[1];
    CoagDosingTube_Origin[2] + 1/4*H_Et + ShortTeeLength(ND_DeliveryPipe) + .5*ND_DeliveryPipe
], "n")
CdcCoagBallValveAir := insertdwg("https://confluence.cornell.edu/download/attachments/173604905/PvcBallValve+Scaled.dwg", CoagDosingTube_Origin + [
    L_PVCBallValve + ShortTeeLength(ND_DeliveryPipe) + SocketDepth(ND_DeliveryPipe);
    0 m;
    (N_CoagTubes + 1)*TeeLength(ND_DeliveryPipe) + ((2*N_CoagTubes + 1)*SocketDepth(ND_DeliveryPipe)) - ShortTeeLength(ND_DeliveryPipe)
], ND_DeliveryPipe/(2 in), ND_DeliveryPipe/(2 in), 90 deg)
FreezeCoagValvesLayer := FreezeLayer("CdcCoagManifoldValves")
ManifoldChlorValveLayer := layer_new("CdcChlorManifoldValves", ltgrey)
CdcChlorineBallValve := insertdwg("https://confluence.cornell.edu/download/attachments/173604905/PvcBallValve+Scaled.dwg", ChlorDosingTube_Origin + [L_PVCBallValve; 0 m; 0 m], ND_DeliveryPipe/(2 in), ND_DeliveryPipe/(2 in), 0 deg)
RotateCdcChlorineBallValve := Rotate3DLast(ChlorDosingTube_Origin + [L_PVCBallValve; 0 m; 0 m], "y", -90 deg)  # Chlorine ball valves not showing up --> done
# All the choosing between max(N-1,1) are changed to N+1 to ensure that an extra tube is drawn in all cases. But some indices may have been messed up
ArrayChlorineBallValve := ArrayLast(N_ChlorTubes + 1, 1, B_DosingTubes)
# There is an extra tee being drawn on the top right side for both chlorine and coagulant, need to figure out how to get rid of it --> done
MirrorChlorineValves := Mirror3dAll("yz", [
    ChlorDosingTube_Origin[0] - .5*L_ChlorTube;
    ChlorDeliveryPipe_Origin[1];
    ChlorDeliveryPipe_Origin[2]
], "n")
CdcChlorineBallValveAir := insertdwg("https://confluence.cornell.edu/download/attachments/173604905/PvcBallValve+Scaled.dwg", ChlorDosingTube_Origin + [
    L_PVCBallValve + ShortTeeLength(ND_DeliveryPipe) + SocketDepth(ND_DeliveryPipe);
    0 m;
    (N_ChlorTubes + 1)*TeeLength(ND_DeliveryPipe) + ((2*N_ChlorTubes + 1)*SocketDepth(ND_DeliveryPipe)) - ShortTeeLength(ND_DeliveryPipe)
], ND_DeliveryPipe/(2 in), ND_DeliveryPipe/(2 in), 90 deg)
FreezeChlorValvesLayer := FreezeLayer("CdcChlorManifoldValves")
# Air removal ball valves position not right
ManifoldFitting_Script :=
    stack(CoagManifoldPluLayer, CoagConnectorPipe, view("f"), ArrayCoagConnectorPipe, MirrorCoagConnectorPipe, view("t"), CoagDeliveryConnectorPipe, CoagDeliveryPipe, FreezeCoagManifoldPlu, CoagManifoldPluLongLayer, CoagConnectorPipeLong, FreezeCoagManifoldPluLongLayer, ChlorManifoldPluLayer, ChlorConnectorPipe, view("f"), ArrayChlorConnectorPipe, MirrorChlorConnectorPipe, view("t"), ChlorConnectorPipeLong, ChlorDeliveryConnectorPipe, ChlorineDeliveryPipe, FreezeChlorManifoldPlu, ManifoldFittingsLayer, ElbowCoagCHT, ElbowChlorCHT, ElbowCoagDosing, Elbow90ChlorDosing, TeeCoagDosingTopRight, TeeChlorDosingTopRight, ElbowCoagDosingBottomLeft, ElbowChlorDosingBottomLeft, FreezeFittings, CoagTees, FreezeCoagTees, ChlorTees, FreezeChlorTees) if N_CoagTubes + N_ChlorTubes ≤ N_TubesTriggerStack or L_ChlorineDeliveryPipe > L_CoagDeliveryPipe + 2*(ElbowRadius(ND_DeliveryPipe) + SocketDepth(ND_DeliveryPipe))
    stack(CoagManifoldPluLayer, CoagConnectorPipe, view("f"), ArrayCoagConnectorPipe, MirrorCoagConnectorPipe, view("t"), CoagDeliveryConnectorPipe, CoagDeliveryPipe, FreezeCoagManifoldPlu, CoagManifoldPluLongLayer, CoagConnectorPipeLong, FreezeCoagManifoldPluLongLayer, ChlorManifoldPluLayer, ChlorConnectorPipe, view("f"), ArrayChlorConnectorPipe, MirrorChlorConnectorPipe, view("t"), ChlorConnectorPipeLong, ChlorElbowConnectorPipeBottom, ChlorBridgeConnectorPipe, ChlorElbowConnectorPipeTop, ChlorDeliveryConnectorPipe, ChlorineDeliveryPipe, FreezeChlorManifoldPlu, ManifoldFittingsLayer, ElbowCoagCHT, ElbowChlorCHT, ElbowCoagDosing, Elbow90ChlorDosing, Elbow45ChlorDosingBottom, Elbow45ChlorDosingMiddle, Elbow45ChlorDosingTop, TeeCoagDosingTopRight, TeeChlorDosingTopRight, ElbowCoagDosingBottomLeft, ElbowChlorDosingBottomLeft, FreezeFittings, CoagTees, FreezeCoagTees, ChlorTees, FreezeChlorTees) otherwise
ManifoldValve_Script := stack(ManifoldCoagValveLayer, CdcCoagBallValve, RotateCdcCoagBallValve, view("f"), ArrayCoagBallValve, MirrorCoagValves, view("t"), CdcCoagBallValveAir, FreezeCoagValvesLayer, ManifoldChlorValveLayer, CdcChlorineBallValve, RotateCdcChlorineBallValve, view("f"), ArrayChlorineBallValve, MirrorChlorineValves, view("t"), CdcChlorineBallValveAir, FreezeChlorValvesLayer)
Manifold_Script := stack(ManifoldFitting_Script, ManifoldValve_Script)
# Dosing Tubes
L_CoagTube = 0.981625 m
D_CoagTubeStockToCHEst = 0.140364 in
N_CoagTubes = 4
L_ChlorTube = 1.34767 m
D_ChlorTubeStockToCHEst = 0.139736 in
N_ChlorTubes = 4
DosingTubesLayer := layer_new("CdcDosingPlu", red)
CoagTube := PipeF(CoagDosingTube_Origin, L_CoagTube, [0; 0]*deg, D_CoagTubeStockToCHEst, PS_FlexTube)
ViewFront := view("f")
ArrayCoagTube := ArrayLast(max(N_CoagTubes, 2), 1, B_DosingTubes)
ArrayCoagTube_test := ArrayLast(N_CoagTubes + 1, 1, B_DosingTubes)
ViewTop := view("t")
ChlorineTube := PipeF(ChlorDosingTube_Origin, L_ChlorTube, [0; 0]*deg, D_ChlorTubeStockToCHEst, PS_FlexTube)
ArrayChlorineTube := ArrayLast(max(N_ChlorTubes, 2), 1, B_DosingTubes)
ArrayChlorineTube_test := ArrayLast(N_ChlorTubes + 1, 1, B_DosingTubes)
FreezeDosingTubes := FreezeLayer("CdcDosingPlu")
Dosing_Script := stack(DosingTubesLayer, CoagTube, ViewFront, ArrayCoagTube_test, ViewTop, ChlorineTube, ViewFront, ArrayChlorineTube_test, ViewTop, FreezeDosingTubes)
# Calibration Column Definitions
SF_CalCol := 1.25
Ti_Res := 1.25*min
H_CalCol := 30 cm
Q_CoagCalColMax := SF_CalCol*Q_CoagMax
Vol_CoagCalCol := Ti_Res*Q_CoagCalColMax
D_inCoagCCMin := sqrt(4*Vol_CoagCalCol/(π*H_CalCol)) = 2.49048 in
ND_CoagCalCol := ND(D_inCoagCCMin, Sch40)
D_inCoagCalCol := ID(ND_CoagCalCol, Sch40) = 0.269 in
Q_ChlorCalColMax := SF_CalCol*Q_ChlorMax
Vol_ChlorCalCol := Ti_Res*Q_ChlorCalColMax
D_inChlorCCMin := sqrt(4*Vol_ChlorCalCol/(π*H_CalCol)) = 2.47354 in
ND_ChlorCalCol := ND(D_inChlorCCMin, Sch40)
D_inChlorCalCol := ID(ND_ChlorCalCol, Sch40) = 0.269 in
Q_FCCalColMax := SF_CalCol*Q_CoagMax
Vol_FCCalCol := Ti_Res*Q_FCCalColMax
D_inFCCCMin := sqrt(4*Vol_FCCalCol/(π*H_CalCol)) = 2.49048 in
ND_FCCalCol := ND(D_inFCCCMin, Sch40)
D_inFCCalCol := ID(ND_FCCalCol, Sch40) = 0.269 in
R_Cylinder := .5 cm
# Calibration Column Origin Points
# Z_CoagulantOutlet | was set equal to Z.FloatTop
CoagCalCol_Origin := [
    ChemPlatform_Origin[0] + ChemPlatform_Dimensions[0] + T_PlantWall + OR_Fitting(ND_CoagCalCol);
    CHT2_Origin[1] - 2*OR_Fitting(ND_CoagCalCol) - 1/2*D_CHT - 2*zc;
    Z_FloatTop
]
CoagTopCap_Origin := [CoagCalCol_Origin[0]; CoagCalCol_Origin[1]; CoagCalCol_Origin[2] + H_CalCol]
ChlorCalCol_Origin := [
    CoagCalCol_Origin[0] - OR_Fitting(ND_CoagCalCol) + OR_Fitting(ND_ChlorCalCol);
    CoagCalCol_Origin[1] - 2*zc - 2*OR_Fitting(ND_CoagCalCol) - OR_Fitting(ND_ChlorCalCol);
    Z_FloatTop
]
ChlorTopCap_Origin := [ChlorCalCol_Origin[0]; ChlorCalCol_Origin[1]; ChlorCalCol_Origin[2] + H_CalCol]
# To draw the hole in the top cap, we are subtracting a cylinder from the top cap layer
CoagCylinder_Origin := [CoagCalCol_Origin[0]; CoagCalCol_Origin[1]; CoagCalCol_Origin[2] + H_CalCol/2]
ChlorCylinder_Origin := [ChlorCalCol_Origin[0]; ChlorCalCol_Origin[1]; ChlorCalCol_Origin[2] + H_CalCol/2]
# Calibration Column and Constant Head Tanks
MakeCalColLayer := layer_new("CdcCalColumnPlu", ltpurple)
MainCoagCalCol := PipeF(CoagCalCol_Origin, H_CalCol, [0; 90]*deg, ND_CoagCalCol, Sch40)
MainChlorCalCol := PipeF(ChlorCalCol_Origin, H_CalCol, [0; 90]*deg, ND_ChlorCalCol, Sch40)
CHT1 := ConstantHeadTankF(CHT_Origin, [90; 0; 90]*deg, D_CHT/2, H_CHT, T_CHTwall, .75*H_CHT, 1/3*in, 1/3*in, 1/3*in, 1/3*in)
CHT2 := ConstantHeadTankF(CHT2_Origin, [90; 0; 90]*deg, D_CHT/2, H_CHT, T_CHTwall, .75*H_CHT, 1/3*in, 1/3*in, 1/3*in, 1/3*in)
CHT3 := ConstantHeadTankF(CHT3_Origin, [90; 0; 90]*deg, D_CHT/2, H_CHT, T_CHTwall, .75*H_CHT, 1/3*in, 1/3*in, 1/3*in, 1/3*in)
CHT4 := ConstantHeadTankF(CHT4_Origin, [90; 0; 90]*deg, D_CHT/2, H_CHT, T_CHTwall, .75*H_CHT, 1/3*in, 1/3*in, 1/3*in, 1/3*in)
FreezeCalCol := FreezeLayer("CdcCalColumnPlu")
MakeCapsLayer := layer_new("CdcColumnCapsPlu", blue2)
CoagTopCap := CapF(CoagTopCap_Origin, [0; -90]*deg, ND_CoagCalCol)
CoagBottomCap := CapF(CoagTopCap_Origin - [0 m; 0 m; H_CalCol], [0; 90]*deg, ND_CoagCalCol)
ChlorTopCap := CapF(ChlorTopCap_Origin, [0; -90]*deg, ND_ChlorCalCol)
ChlorBottomCap := CapF(ChlorTopCap_Origin - [0 m; 0 m; H_CalCol], [0; 90]*deg, ND_ChlorCalCol)
FreezeCapsLayer := FreezeLayer("CdcColumnCapsPlu")
DrawCoagCylinder := CylinderF(CoagCylinder_Origin, R_Cylinder, H_CalCol, [0; 90]*deg)
DrawChlorCylinder := CylinderF(ChlorCylinder_Origin, R_Cylinder, H_CalCol, [0; 90]*deg)
LayCylinder := GroupAll("DeleteMe")
MakeHole := SubtractF(["CdcColumnCapsPlu"], "DeleteMe")
CdcCalColumn2_Script := stack(MakeCalColLayer, MainCoagCalCol, MainChlorCalCol, CHT1, CHT2, CHT3, CHT4, FreezeCalCol, MakeCapsLayer, CoagTopCap, CoagBottomCap, ChlorTopCap, ChlorBottomCap, FreezeCapsLayer, DrawCoagCylinder, DrawChlorCylinder, LayCylinder, MakeHole)
CdcCalColumn1_Script := stack(MakeCalColLayer, MainChlorCalCol, CHT1, FreezeCalCol, MakeCapsLayer, ChlorTopCap, ChlorBottomCap, FreezeCapsLayer, DrawChlorCylinder, CHT2, LayCylinder, MakeHole)
drawthelever := stack(AC_EntranceTank, LeverArmCHT2_Script)
AC_Cdc2 := stack(Cdc2_Script, Dosing_Script, Manifold_Script, CdcCalColumn2_Script)
# [component: inputs drawthelever]
AC_Cdc1 := stack(Cdc1_Script, Dosing_Script, Manifold_Script, CdcCalColumn1_Script)
AC_Cdc := AC_Cdc2
drawmenow := stack(AC_EntranceTank, AC_Cdc)
AC_OperatorAccess
Drawing := stack(EtTankScript, AC_Cdc, AC_ChemTanks)  # error: This variable is undefined.  # AC_ChemTanks
AC_ChemTanks
AltDrawing := stack(EtTankScript, AC_Cdc1, AC_ChemTanks)  # error: This variable is undefined.
AC_OperatorAccess
# [component: inputs drawmenow]
