# References
Q_Plant := 40*L/s
HL_FlocMax := 40 cm
H_SedSlopesToFlocWeirMin := 25 cm
T_FlocSlab := 15 cm
T_SedWall := 15 cm
T_SedDividingWall := 15 cm
T_SedChannelWall := 15 cm
T_FlocWall := 15 cm
T_FlocDividingWall := 15 cm
T_FiWall := 25 cm
T_FiBoxWall := 15 cm
T_PlantWall := 15 cm
T_PlantFloor := 20 cm
T_ChemSlab := 15 cm
T_DrainChannelWall := 15 cm
C_CoagDoseMax := 40*mg/L
C_ChlorDoseAve := 1*mg/L
# Mathcad to AutoCAD translators:
# [reference: MtoATranslators.xmcd]
# The wrapped MtoA translator contains the functions that the user will want to access. These functions will draw pieces with full functionality - specifying the location, dimension, and orientation of the object. Also, it contains layer control and subtraction capabilities for grouped objects.
# [reference: MtoATranslatorsWrapped.xmcd]
# Plant design calculations:
# [reference: ExpertInputs.xmcd]
# [reference: MathFunctions.xmcd]
# [reference: PipeDatabase.xmcd]
# [reference: MaterialsDatabase.xmcd]
# [reference: FluidsFunctions.xmcd]
# [reference: SedimentationTank.xmcd]
# [reference: LFOM.xmcd]
# [reference: FlocculatorEntranceTank.xmcd]
# [reference: StackedRapidSandFilter.xmcd]
# [reference: ChemicalDoseController_st587.xmcd]
# AutoCAD drawing functions:
# [reference: ChannelF.xmcd]
# [reference: PlumbingF.xmcd]
# [reference: TankF.xmcd]
# [reference: StairsF.xmcd]
# [reference: DrainChannelF.xmcd]
# AutoCAD script files:
# [reference: FlocculatorAC.xmcd]
# [reference: SedimentationTankAC.xmcd]
# [reference: EntranceTankCompactAC.xmcd]
# [reference: StackedRapidSandFilterAC.xmcd]
# [reference: ChemStockTanksAC.xmcd]
# [reference: OperatorAccessAC.xmcd]
# Width and length of the chemical platform are defined in ChemStockTanksAC
ChemPlatform_Origin := [
    CoagTank_Origin[0] + R_CoagTank + T_ChemTankWall + S_ChemTankBorder - L_ChemPlatform;
    Et_Origin[1] + W_Et + T_PlantWall - W_ChemPlatform;
    CoagTank_Origin[2] - T_ChemTankWall - T_PlantWall
]
ChemPlatform_Dimensions := [L_ChemPlatform; W_ChemPlatform; T_PlantWall]
# Chemical Dose Controller
# Layers
# Lever Arm
CdcLeverLayer := layer_new("CdcLever", ltgrey)
SelectCdcLever := SelectLayer("CdcLever")
CdcLeverFrz := FreezeLayer("CdcLever")
CdcFloatLayer := layer_new("CdcFloat", red)
SelectCdcFloat := SelectLayer("CdcFloat")
CdcFloatFrz := FreezeLayer("CdcFloat")
MakeCdcLayer := layer_new("CdcLayer", ltgrey)
FreezeCdcLayer := FreezeLayer("CdcLayer")
ThawCdcLayer := ThawMultiple(["CdcLayer"])
CdcCoagManifoldPluLayer := layer_new("CdcCoagManifoldPlu", blue)
SelectCdcCoagManifoldPlu := SelectLayer("CdcCoagManifoldPlu")
CdcCoagManifoldPluFrz := FreezeLayer("CdcCoagManifoldPlu")
CdcCoagManifoldPluLongLayer := layer_new("CdcCoagManifoldPluLong", blue)
SelectCdcCoagManifoldPluLong := SelectLayer("CdcCoagManifoldPluLong")
CdcCoagManifoldPluLongFrz := FreezeLayer("CdcCoagManifoldPluLong")
CdcChlorManifoldPluLayer := layer_new("CdcChlorManifoldPlu", blue)
SelectCdcCoagManifoldPlu := SelectLayer("CdcChlorManifoldPlu")
CdcChlorManifoldPluFrz := FreezeLayer("CdcChlorManifoldPlu")
CdcManifoldFittingsLayer := layer_new("CdcManifoldFittings", green)
SelectCdcManifoldFittings := SelectLayer("CdcManifoldFittings")
CdcManifoldFittingsFrz := FreezeLayer("CdcManifoldFittings")
CdcCoagTeesLayer := layer_new("CdcCoagTees", green)
SelectCdcCoagTees := SelectLayer("CdcCoagTees")
CoagTeesFrz := FreezeLayer("CdcCoagTees")
CdcChlorTeesLayer := layer_new("CdcChlorTees")
SelectCdcChlorTees := SelectLayer("CdcChlorTees")
CdcChlorTeesFrz := FreezeLayer("CdcChlorTees")
CdcCoagManifoldValvesLayer := layer_new("CdcCoagManifoldValves", ltgrey)
SelectCdcCoagManifoldValves := SelectLayer("CdcCoagManifoldValves")
CdcCoagManifoldValvesFrz := FreezeLayer("CdcCoagManifoldValves")
CdcChlorManifoldValvesLayer := layer_new("CdcChlorManifoldValves", ltgrey)
SelectCdcChlorManifoldValves := SelectLayer("CdcChlorManifoldValves")
CdcChlorManifoldValvesFrz := FreezeLayer("CdcChlorManifoldValves")
# Dimensions
# Constant Head Tank Dimensions
# five gallons bucket dimensions for constant head tanks
D_CHT := 30/3*cm
H_CHT := 37/3*cm
T_CHTwall := 1/3*cm
ND_DeliveryPipe := 1 in  # based on measurements in the lab and the system in Atima
PS_FlexTube := 2
L_PVCBallValve := .1625 m/2
B_DosingTubes := max(TeeLength(ND_DeliveryPipe) + 2*SocketDepth(ND_DeliveryPipe), 2*ElbowRadius(ND_DeliveryPipe) + 2*SocketDepth(ND_DeliveryPipe))
T_MountingBoard := 1.5 in
L_CoagDeliveryPipe := L_CoagTube + 2*L_PVCBallValve + 2*ShortTeeLength(ND_DeliveryPipe) + ElbowRadius(ND_DeliveryPipe) + OR_Fitting(ND_DeliveryPipe)
L_ChlorineDeliveryPipe := L_ChlorTube + 2*L_PVCBallValve + 2*ShortTeeLength(ND_DeliveryPipe) + ElbowRadius(ND_DeliveryPipe) + OR_Fitting(ND_DeliveryPipe)
L_DosingConnectors := L_PVCBallValve + SocketDepth(ND_DeliveryPipe)
# Lever Dimensions
L_CdcLeverArm := 0.5 m
L_CdcLeverArmExtended := 8.5 cm
# Perpendicular distance from LeverArm.Origin to the Float Cable
L_CdcLeverHoriz := ((L_CdcLeverArm + L_CdcLeverArmExtended)^2 - HL_Lfom^2)^.5 = 0.52889 m
# Maybe I can delete these since the lever is rotated
L_CdcLeverVert := HL_Lfom = 0.25 m  # Distance from the top most part of the Lever Arm on an angle to the height of the Lever Arm Pivot
AN_LA := asin(HL_Lfom/L_CdcLever) = 30 deg
L_CdcLeverCylinder := 6 in
D_CdcLeverCylinder1 := 1 in  # Should be moved to expert inputs
L_EtFrontWallToCdcFloat := 0.874 m
D_CdcLeverCylinder4 := 2 in
# idk if this is defined or calculated in a dif file but i cant find it in
# expert inputs
D_CdcLeverCylinder2 := 0.5 in
L_CdcLeverPivottoCylinder2 := 6 cm
L_CdcLeverCylinder2to3 := 9.5 cm
L_CdcLeverPivotBox := 2 in
W_CdcLeverPivotBox := 1 in
H_CdcLeverPivotBox := 1 in
T_CdcLeverArm := 1/8*in
H_CdcLeverArm := 1 in
L_CdcLeverInnerBar := 7 in
L_CdcLeverMountingPlate := 6 in
W_CdcLeverMountingPlate := 0.5 cm
H_CdcLeverMountingPlate := 2 in
S_LeverToEtZTop := 1 cm
T_CdcFloat := 5 cm
D_CdcFloatCable := 0.5 cm
# Origin Points
# Lever Arm Origin Points
CdcLeverArm_Origin := [
    Et_Origin[0] - L_Et + L_EtFrontWallToCdcFloat + S_Fitting;
    Et_Origin[1] + W_Et + T_FlocWall;
    Z_EtTop + S_LeverToEtZTop
] = [-5.76902; 10.75; 2.68059] m
# the x and y coordinates of LA.Origin were changed to those of the DosingSubBox.Origin
CdcLeverArm2_Origin := [
    CdcLeverArm_Origin[0] + L_CdcLeverCylinder + T_CdcLeverArm;
    CdcLeverArm_Origin[1];
    CdcLeverArm_Origin[2]
] = [-5.61344; 10.75; 2.68059] m
D_LABOrigintoLAOriginZ = 1 in
Z_EtTop + D_LABOrigintoLAOriginZ/2 = 2.68329 m
CdcFloat_Origin := [
    (CdcLeverArm_Origin[0] + CdcLeverArm2_Origin[0])/2;
    CdcLeverArm_Origin[1] - L_CdcLeverHoriz;
    ZW_EtMax - T_CdcFloat/2
] = [-5.69123; 10.2211; 2.54559] m
ZW_EtMax = 2.57059 m
Z_EtTop = 2.67059 m
T_EtFloat/2 = 0.025 m
ZW_EtMax - T_EtFloat/2 = 2.54559 m
CdcLeverSlider1_Origin := [
    CdcLeverArm_Origin[0] - H_Slider + W_Slider;
    CdcLeverArm_Origin[1] + L_LAOriginToDtY/2 - H_Slider;
    CdcLeverArm_Origin[2] + H_LeverArm + W_Slider
] = [-5.78169; 11.1247; 2.70919] m
[
    CdcLeverArm_Origin[0] - H_Slider + W_Slider;
    CdcLeverArm_Origin[1] + L_LAOriginToDtY/2 - H_Slider - zc;
    CdcLeverArm_Origin[2] + H_LeverArm + W_Slider
]
CdcLeverSlider2_Origin := [
    CdcLeverArm2_Origin[0] - H_Slider + W_Slider;
    CdcLeverArm2_Origin[1] + L_LAOriginToDtY/2 - H_Slider - zc;
    CdcLeverArm2_Origin[2] + H_LeverArm + W_Slider
]
CdcLeverPivotBox_Origin := [
    CdcLeverArm_Origin[0] + OR_Fitting(ND_EtFloat)/3 - T_CdcLeverArm;
    CdcLeverArm_Origin[1] + W_CdcLeverPivotBox/2;
    CdcLeverArm_Origin[2] + H_CdcLeverPivotBox
]
CdcLeverDropTube_Origin := [
    CdcLeverArm_Origin[0] - L_LAOriginToDtCenterX;
    CdcLeverArm_Origin[1] + L_LAOriginToDtY/2;
    CdcLeverArm_Origin[2] + L_LAOriginToDtZ + H_LeverArm
]
[
    LA_Origin[0] - L_LAOriginToDtCenterX;
    LA_Origin[1] + L_LAOriginToDtY/2;
    LA_Origin[2] + L_LAOriginToDtZ + H_LeverArm
]
CdcLeverDropTube2_Origin := [
    CdcLeverArm_Origin[0] + L_LAOriginToDtCenterX;
    CdcLeverArm_Origin[1] + L_LAOriginToDtY/2;
    CdcLeverArm_Origin[2] + L_LAOriginToDtZ + H_LeverArm
]
CHT_Origin := [
    ChemPlatform_Origin[0] + ChemPlatform_Dimensions[0] + T_PlantWall + 1/2*D_CHT;
    ChemPlatform_Origin[1] - 1/2*D_CHT + ChemPlatform_Dimensions[1] - T_PlantWall;
    ZW_CdcCht
] = [-7.78802; 10.55; 2.73829] m
CHT2_Origin := [CHT_Origin[0]; CHT_Origin[1] - 1.5*D_CHT; CHT_Origin[2]]
CHT3_Origin := [CHT_Origin[0]; CHT2_Origin[1] - 1.5*D_CHT; CHT_Origin[2]]
CHT4_Origin := [CHT_Origin[0]; CHT3_Origin[1] - 1.5*D_CHT; CHT_Origin[2]]
N_TubesTriggerStack := 2
# The first case triggers when both N values are equalt to 1, in other words when there are
# two Coag dosing tubes and two Chlor dosing tubes. This case will stack the dosing manifolds.
ChlorDeliveryPipe_Origin :=
    if N_CoagTubes + N_ChlorTubes ≤ N_TubesTriggerStack
        [
            CdcLeverArm_Origin[0] + L_ChlorineDeliveryPipe + 2*(ElbowRadius(ND_DeliveryPipe) + SocketDepth(ND_DeliveryPipe));
            Et_Origin[1] - T_PlantWall - OR_Fitting(ND_DeliveryPipe);
            Z_Walkway + 1.5*OR_Fitting(ND_DeliveryPipe) + (N_CoagTubes + 2)*B_DosingTubes + ElbowRadius(ND_DeliveryPipe) + SocketDepth(ND_DeliveryPipe)
        ]
    if L_CoagDeliveryPipe ≤ L_ChlorineDeliveryPipe
        [
            CdcLeverArm_Origin[0] + L_ChlorineDeliveryPipe;
            Et_Origin[1] - T_PlantWall - OR_Fitting(ND_DeliveryPipe);
            Z_Walkway + 1.5*OR_Fitting(ND_DeliveryPipe)
        ]
    otherwise
        [
            CdcLeverArm_Origin[0] + L_ChlorineDeliveryPipe;
            Et_Origin[1] - T_PlantWall - OR_Fitting(ND_DeliveryPipe);
            Z_Walkway + 1.5*OR_Fitting(ND_DeliveryPipe) - ((-ElbowRadius(ND_DeliveryPipe) - OR_Fitting(ND_DeliveryPipe)/2 + 2*SocketDepth(ND_DeliveryPipe) + .5*TeeLength(ND_DeliveryPipe)) - S_Fitting - 2*OR_Fitting(ND_DeliveryPipe))
        ]
# The second case will nest the dosing manifolds with the chlorine delivery pipe on the bottom.
# The third case will nest the dosing manifolds with the coagulant delivery pipe on the bottom.
ChlorDosingTube_Origin :=
    if N_CoagTubes + N_ChlorTubes ≤ N_TubesTriggerStack
        ChlorDeliveryPipe_Origin + [
            -L_PVCBallValve - SocketDepth(ND_DeliveryPipe);
            0 m;
            ElbowRadius(ND_DeliveryPipe) + 2*SocketDepth(ND_DeliveryPipe) + .5*TeeLength(ND_DeliveryPipe)
        ]
    otherwise
        ChlorDeliveryPipe_Origin + [
            -L_PVCBallValve - SocketDepth(ND_DeliveryPipe);
            0 m;
            ElbowRadius(ND_DeliveryPipe) + 2*SocketDepth(ND_DeliveryPipe) + .5*TeeLength(ND_DeliveryPipe) + (N_CoagTubes + 1)*B_DosingTubes + L_PVCBallValve
        ]
OffsetCoagChlor :=
    if N_CoagTubes + N_ChlorTubes ≤ N_TubesTriggerStack
        [
            0 m;
            0 m;
            -((N_CoagTubes + 2)*B_DosingTubes + ElbowRadius(ND_DeliveryPipe) + SocketDepth(ND_DeliveryPipe))
        ]
    if L_CoagDeliveryPipe ≤ L_ChlorineDeliveryPipe
        [
            S_Fitting + OR_Fitting(ND_DeliveryPipe)/2;
            0 m;
            (ElbowRadius(ND_DeliveryPipe) + OR_Fitting(ND_DeliveryPipe)/2 + 2*SocketDepth(ND_DeliveryPipe) + .5*TeeLength(ND_DeliveryPipe)) - S_Fitting - 2*OR_Fitting(ND_DeliveryPipe)
        ]
    otherwise
        [
            -S_Fitting - OR_Fitting(ND_DeliveryPipe)/2;
            0 m;
            (-ElbowRadius(ND_DeliveryPipe) - OR_Fitting(ND_DeliveryPipe)/2 + 2*SocketDepth(ND_DeliveryPipe) + .5*TeeLength(ND_DeliveryPipe)) - S_Fitting - 2*OR_Fitting(ND_DeliveryPipe)
        ]
CoagDeliveryPipe_Origin := OffsetCoagChlor + [
    CdcLeverArm_Origin[0] + L_CoagDeliveryPipe;
    Et_Origin[1] - T_PlantWall - OR_Fitting(ND_DeliveryPipe);
    ChlorDeliveryPipe_Origin[2]
]
LeaveSpaceForChlor :=
    2*SocketDepth(ND_DeliveryPipe) if N_CoagTubes + N_ChlorTubes ≤ N_TubesTriggerStack or L_CoagDeliveryPipe ≤ L_ChlorineDeliveryPipe
    3*SocketDepth(ND_DeliveryPipe) otherwise
CoagDosingTube_Origin := CoagDeliveryPipe_Origin + [
    -L_PVCBallValve - SocketDepth(ND_DeliveryPipe);
    0 m;
    ElbowRadius(ND_DeliveryPipe) + LeaveSpaceForChlor + .5*TeeLength(ND_DeliveryPipe)
]
# Lever Arms, Drop Tubes and Sliders
CdcLeverArm1 := BoxF([CdcLeverArm_Origin[0] + 1/8*in; CdcLeverArm_Origin[1] - L_CdcLever; CdcLeverArm_Origin[2]], [CdcLeverArm_Origin[0]; CdcLeverArm_Origin[1] + L_CdcLever; CdcLeverArm_Origin[2] + H_LeverArm], [0; 0; 0]*deg)
# The L brackets which connect the lever arms to the entrance tank are drawn here.
[
    LA_Origin[0] - L_LArmBar/2;
    LA_Origin[1] + L_LArmBar/2;
    LA_Origin[2] + L_LBracket/2 - L_LBracket/8 - 3/4*L_LBracket
]
CdcLeverDropTube1 := PipeF(CdcLeverDropTube_Origin, L_DropTube, [-AN_LA; -90]*deg, ND_DropTube, SDR_13.5)
CdcLeverArm2 := BoxF([CdcLeverArm2_Origin[0] + 1/8*in; CdcLeverArm2_Origin[1] - L_CdcLever; CdcLeverArm2_Origin[2]], [CdcLeverArm2_Origin[0]; CdcLeverArm2_Origin[1] + L_CdcLever; CdcLeverArm2_Origin[2] + H_LeverArm], [0; 0; 0]*deg)
CdcLeverDropTube2 := PipeF(CdcLeverDropTube2_Origin, L_DropTube, [-AN_LA; -90]*deg, ND_DropTube, SDR_13.5)
[
    LA2_Origin[0] - L_LArmBar/2;
    LA2_Origin[1] + L_LArmBar/2;
    LA_Origin[2] + L_LBracket/2 - L_LBracket/8 - 3/4*L_LBracket
] =  # error: This variable is undefined.
Rotate3D_EtLeverArm := Rotate3DLast([CdcLeverArm_Origin[1]; CdcLeverArm_Origin[2]; CdcLeverArm_Origin[0]], "z", -AN_LA*deg)
CdcLeverArmDropTube_Script := stack(CdcLeverLayer, CdcLeverArm1, CdcLeverArm2, CdcLeverDropTube1, CdcLeverDropTube2, CdcLeverFrz, SelectCdcLever, view("r"), Rotate3D_EtLeverArm, view("t"), CdcLeverFrz)
CdcLeverArmDropTube_Scriptidk := stack(CdcLeverLayer, CdcLeverArm1, CdcLeverDropTube1, CdcLeverFrz, SelectCdcLever, view("r"), Rotate3D_EtLeverArm, view("t"), CdcLeverFrz)
CdcLeverSlider2FirstSide := BoxF(CdcLeverSlider2_Origin, [
    CdcLeverSlider2_Origin[0] + L_Slider;
    CdcLeverSlider2_Origin[1] + W_Slider;
    CdcLeverSlider2_Origin[2] - H_Slider
], [90; 0; 0]*deg)
CdcLeverSlider1FirstSide := BoxF(CdcLeverSlider1_Origin, [
    CdcLeverSlider1_Origin[0] + L_Slider;
    CdcLeverSlider1_Origin[1] + W_Slider;
    CdcLeverSlider1_Origin[2] - H_Slider
], [90; 0; 0]*deg)
CdcLeverSlider1TopSide := BoxF(CdcLeverSlider1_Origin, [
    CdcLeverSlider1_Origin[0] + H_Slider;
    CdcLeverSlider1_Origin[1] + L_Slider;
    CdcLeverSlider1_Origin[2] - W_Slider
], [0; 0; 0]*deg)
CdcLeverSlider2TopSide := BoxF(CdcLeverSlider2_Origin, [
    CdcLeverSlider2_Origin[0] + H_Slider;
    CdcLeverSlider2_Origin[1] + L_Slider;
    CdcLeverSlider2_Origin[2] - W_Slider
], [0; 0; 0]*deg)
CdcLeverSlider1SecondSide := BoxF([CdcLeverSlider1_Origin[0] + H_Slider; CdcLeverSlider1_Origin[1]; CdcLeverSlider1_Origin[2]], [
    CdcLeverSlider1_Origin[0] + H_Slider + W_Slider;
    CdcLeverSlider1_Origin[1] + L_Slider;
    CdcLeverSlider1_Origin[2] - H_Slider
], [0; 0; 0]*deg)
CdcLeverSlider2SecondSide := BoxF([CdcLeverSlider2_Origin[0] + H_Slider; CdcLeverSlider2_Origin[1]; CdcLeverSlider2_Origin[2]], [
    CdcLeverSlider2_Origin[0] + H_Slider + W_Slider;
    CdcLeverSlider2_Origin[1] + L_Slider;
    CdcLeverSlider2_Origin[2] - H_Slider
], [0; 0; 0]*deg)
CdcLeverSliders2_Script := stack(SelectCdcLever, CdcLeverSlider1FirstSide, CdcLeverSlider2FirstSide, CdcLeverSlider1TopSide, CdcLeverSlider2TopSide, CdcLeverSlider1SecondSide, CdcLeverSlider2SecondSide, CdcLeverFrz, SelectCdcLever, view("r"), Rotate3D_EtLeverArm, view("t"), CdcLeverFrz)
# Connecting bars, Cylinders and Float Cable
CdcLeverConnectingCylinder1 := CylinderSUBF([
    CdcLeverArm_Origin[0] + T_CdcLeverArm;
    CdcLeverArm_Origin[1] - L_CdcLever + D_CdcLeverCylinder1/2;
    CdcLeverArm_Origin[2] + H_LeverArm/2
], D_CdcLeverCylinder1/2, OR_Fitting(ND_EtFloat), [0; 180]*deg, ["CdcLayer"])
# Top most cylinder. Connected to float. Thickest
# Bottom most cylinder.
CdcLeverConnectingCylinder4 := CylinderSUBF([
    CdcLeverArm_Origin[0] + T_CdcLeverArm;
    CdcLeverArm_Origin[1] + L_CdcLever - D_CdcLeverCylinder4/2;
    CdcLeverArm_Origin[2] + H_LeverArm/2
], D_CdcLeverCylinder4/2, OR_Fitting(ND_EtFloat), [0; 180]*deg, ["CdcLayer"])
[LA_Origin[0] + L_LArmBar/2; LA_Origin[1] + L_LArmBar/2 - W_LBracket/2; LA_Origin[2] + L_LBracket/2]
CdcLeverConnectingCylinder2 := CylinderSUBF([
    CdcLeverArm_Origin[0] + T_CdcLeverArm;
    CdcLeverArm_Origin[1] + L_CdcLeverPivottoCylinder2;
    CdcLeverArm_Origin[2] + H_LeverArm/2
], L_CdcLeverPivottoCylinder2/2, OR_Fitting(ND_EtFloat), [0; 180]*deg, ["CdcLayer"])
# Cylinder closest to the pivot point
# lambars are the bars that connect the lever arms to the L-brackets
CdcLeverConnectingCylinder3 := CylinderSUBF([
    CdcLeverArm_Origin[0] + T_CdcLeverArm;
    CdcLeverArm_Origin[1] + L_CdcLeverPivottoCylinder2 + L_CdcLeverCylinder2to3;
    CdcLeverArm_Origin[2] + H_LeverArm/2
], D_CdcLeverCylinder2/2, OR_Fitting(ND_EtFloat), [0; 180]*deg, ["CdcLayer"])
[
    LA2_Origin[0] + L_LArmBar/2;
    (LA2_Origin[1] + L_LArmBar/2) - W_LBracket/2;
    LA2_Origin[2] + L_LBracket/2
]
CdcLeverPivotBox := BoxF(CdcLeverPivotBox_Origin, [
    CdcLeverPivotBox_Origin[0] + L_CdcLeverPivotBox;
    CdcLeverPivotBox_Origin[1] - W_CdcLeverPivotBox;
    CdcLeverPivotBox_Origin[2] - H_CdcLeverPivotBox
], [0; 0; AN_LA]*deg)
[LA_Origin[0] + H_LeverArm; LA2_Origin[1] + L_CdcLever - 4*zc; LA_Origin[2] + 4*W_LeverArm]
CdcLeverMountingPlate := BoxF(CdcLeverPivotBox_Origin, [
    CdcLeverPivotBox_Origin[0] + H_CdcLeverMountingPlate;
    CdcLeverPivotBox_Origin[1] + W_CdcLeverMountingPlate;
    CdcLeverPivotBox_Origin[2] - L_CdcLeverMountingPlate
], [0; 0; AN_LA]*deg)
CdcLeverInnerBar1 := BoxF([
    CdcLeverPivotBox_Origin[0];
    CdcLeverPivotBox_Origin[1] - W_CdcLeverPivotBox;
    CdcLeverPivotBox_Origin[2]
], [
    CdcLeverPivotBox_Origin[0] - T_CdcLeverArm;
    CdcLeverPivotBox_Origin[1] + L_CdcLeverInnerBar;
    CdcLeverPivotBox_Origin[2] - H_CdcLeverArm
], [0; 0; 0]*deg)
CdcLeverInnerBar2 := BoxF([
    CdcLeverPivotBox_Origin[0] + L_CdcLeverPivotBox;
    CdcLeverPivotBox_Origin[1] - W_CdcLeverPivotBox;
    CdcLeverPivotBox_Origin[2]
], [
    CdcLeverPivotBox_Origin[0] + L_CdcLeverPivotBox + T_CdcLeverArm;
    CdcLeverPivotBox_Origin[1] + L_CdcLeverInnerBar;
    CdcLeverPivotBox_Origin[2] - H_CdcLeverArm
], [0; 0; 0]*deg)
L_Cable := (CdcLeverArm_Origin[2] - EtFloat_Origin[2]) - T_EtFloat + L_CdcLeverVert = 0.335 m
CdcFloatCable := CylinderF([
    CdcLeverArm_Origin[0] + OR_Fitting(ND_EtFloat)/2;
    CdcLeverArm_Origin[1] - L_CdcLever + D_CdcLeverCylinder1/2;
    CdcLeverArm_Origin[2] + H_CdcLeverArm/2
], D_CdcFloatCable, L_Cable, [-AN_LA; -90*deg])
ConnectCyl2_Script := stack(SelectCdcLever, CdcLeverConnectingCylinder1, CdcLeverPivotBox, CdcLeverMountingPlate, CdcLeverInnerBar1, CdcLeverInnerBar2, CdcLeverConnectingCylinder2, CdcLeverConnectingCylinder3, CdcLeverConnectingCylinder4, CdcFloatCable, CdcLeverFrz, SelectCdcLever, view("r"), Rotate3D_EtLeverArm, view("t"), CdcLeverFrz)
# Sliders
CdcLeverSlider1FirstSide := BoxF(CdcLeverSlider1_Origin, [
    CdcLeverSlider1_Origin[0] + L_Slider;
    CdcLeverSlider1_Origin[1] + W_Slider;
    CdcLeverSlider1_Origin[2] - H_Slider
], [90; 0; 0]*deg)
CdcLeverSlider2FirstSide := BoxF(CdcLeverSlider2_Origin, [
    CdcLeverSlider2_Origin[0] + L_Slider;
    CdcLeverSlider2_Origin[1] + W_Slider;
    CdcLeverSlider2_Origin[2] - H_Slider
], [90; 0; 0]*deg)
CdcLeverSlider1TopSide := BoxF(CdcLeverSlider1_Origin, [
    CdcLeverSlider1_Origin[0] + H_Slider;
    CdcLeverSlider1_Origin[1] + L_Slider;
    CdcLeverSlider1_Origin[2] - W_Slider
], [0; 0; 0]*deg)
CdcLeverSlider2TopSide := BoxF(CdcLeverSlider2_Origin, [
    CdcLeverSlider2_Origin[0] + H_Slider;
    CdcLeverSlider2_Origin[1] + L_Slider;
    CdcLeverSlider2_Origin[2] - W_Slider
], [0; 0; 0]*deg)
CdcLeverSlider1SecondSide := BoxF([CdcLeverSlider1_Origin[0] + H_Slider; CdcLeverSlider1_Origin[1]; CdcLeverSlider1_Origin[2]], [
    CdcLeverSlider1_Origin[0] + H_Slider + W_Slider;
    CdcLeverSlider1_Origin[1] + L_Slider;
    CdcLeverSlider1_Origin[2] - H_Slider
], [0; 0; 0]*deg)
CdcLeverSlider2SecondSide := BoxF([CdcLeverSlider2_Origin[0] + H_Slider; CdcLeverSlider2_Origin[1]; CdcLeverSlider2_Origin[2]], [
    CdcLeverSlider2_Origin[0] + H_Slider + W_Slider;
    CdcLeverSlider2_Origin[1] + L_Slider;
    CdcLeverSlider2_Origin[2] - H_Slider
], [0; 0; 0]*deg)
Sliders2_Script := stack(SelectCdcLever, CdcLeverSlider1FirstSide, CdcLeverSlider2FirstSide, CdcLeverSlider1TopSide, CdcLeverSlider2TopSide, CdcLeverSlider1SecondSide, CdcLeverSlider2SecondSide, CdcLeverFrz, SelectCdcLever, view("r"), Rotate3D_EtLeverArm, view("t"), CdcLeverFrz)
Sliders1_Script := stack(SelectCdcLever, CdcLeverSlider1FirstSide, CdcLeverSlider1TopSide, CdcLeverSlider1SecondSide, CdcLeverFrz)
# Float
EtFloat := CylinderF(EtFloat_Origin, OR_Fitting(ND_EtFloat), T_EtFloat, [0; 90]*deg)
EtFloatScript := stack(EtFloatLayer, EtFloat, EtFloatFrz)
Cdc2_Script := stack(LeverArmCHT2_Script, ConnectCyl2_Script, Sliders2_Script, EtFloatScript)
leverwithbars := stack(LeverArmCHT2_Script, ConnectCyl2_Script, Sliders2_Script)
Cdc1_Script := stack(LeverArmCHT1_Script, ConnectCyl1_Script, Sliders1_Script, EtFloatScript)
LeverArmCHT2_Script
# [component: inputs leverwithbars]
CoagConnectorPipe := PipeF(CoagDosingTube_Origin + [L_DosingConnectors + ShortTeeLength(ND_DeliveryPipe); 0 m; 0.5*TeeLength(ND_DeliveryPipe)], 2*SocketDepth(ND_DeliveryPipe), [0; 90]*deg, ND_DeliveryPipe, SDR_13.5)
ArrayCoagConnectorPipe := ArrayLast(N_CoagTubes + 1, 1, B_DosingTubes)
MirrorCoagConnectorPipe := Mirror3dAll("yz", [
    CoagDosingTube_Origin[0] - .5*L_TubeStockToCHEst;
    CoagDosingTube_Origin[1];
    CoagDosingTube_Origin[2] + 1/4*H_Et + ShortTeeLength(ND_DeliveryPipe) + .5*ND_DeliveryPipe
], "n")
CoagDeliveryConnectorPipe := PipeF(CoagDosingTube_Origin + [
    L_DosingConnectors + ShortTeeLength(ND_DeliveryPipe);
    0 m;
    -0.5*TeeLength(ND_DeliveryPipe) - 2*SocketDepth(ND_DeliveryPipe)
], 2*SocketDepth(ND_DeliveryPipe), [0; 90]*deg, ND_DeliveryPipe, SDR_13.5)
CoagDeliveryPipe := PipeF(CoagDeliveryPipe_Origin, L_CoagDeliveryPipe, [0; 0]*deg, ND_DeliveryPipe, SDR_13.5)
L_CoagLongConnectorPipe := CoagDosingTube_Origin[2] - CoagDeliveryPipe_Origin[2] - .5*TeeLength(ND_DeliveryPipe) - ElbowRadius(ND_DeliveryPipe)
CoagConnectorPipeLong := PipeF(CoagDosingTube_Origin + [L_DosingConnectors + ShortTeeLength(ND_DeliveryPipe); 0 m; -.5*TeeLength(ND_DeliveryPipe)], L_CoagLongConnectorPipe, [0; -90]*deg, ND_DeliveryPipe, SDR_13.5)
ChlorConnectorPipe := PipeF(ChlorDosingTube_Origin + [L_DosingConnectors + ShortTeeLength(ND_DeliveryPipe); 0 m; .5*TeeLength(ND_DeliveryPipe)], 2*SocketDepth(ND_DeliveryPipe), [0; 90]*deg, ND_DeliveryPipe, SDR_13.5)
ArrayChlorConnectorPipe := ArrayLast(N_ChlorTubes + 1, 1, B_DosingTubes)
MirrorChlorConnectorPipe := Mirror3dAll("yz", [
    ChlorDosingTube_Origin[0] - .5*L_ChlorTube;
    ChlorDosingTube_Origin[1];
    ChlorDosingTube_Origin[2] + 1/4*H_Et + ShortTeeLength(ND_DeliveryPipe) + .5*ND_DeliveryPipe
], "n")
L_ChlorLongConnectorPipe :=
    2*SocketDepth(ND_DeliveryPipe) if N_CoagTubes + N_ChlorTubes ≤ N_TubesTriggerStack
    ChlorDosingTube_Origin[2] - ChlorDeliveryPipe_Origin[2] - .5*TeeLength(ND_DeliveryPipe) - ElbowRadius(ND_DeliveryPipe) if L_ChlorineDeliveryPipe > L_CoagDeliveryPipe + 2*(ElbowRadius(ND_DeliveryPipe) + SocketDepth(ND_DeliveryPipe))
    max(ChlorDosingTube_Origin[2] - ChlorDeliveryPipe_Origin[2] - .5*TeeLength(ND_DeliveryPipe) - ElbowRadius(ND_DeliveryPipe) - (2*sin(45 deg)*(2*ElbowRadius(ND_DeliveryPipe) + 2*SocketDepth(ND_DeliveryPipe)) + (N_ChlorTubes + 1)*B_DosingTubes + sin(45 deg)*(1 - tan(22.5 deg))*ElbowRadius(ND_DeliveryPipe) + SocketDepth(ND_DeliveryPipe)), 2*SocketDepth(ND_DeliveryPipe)) otherwise
ChlorConnectorPipeLong := PipeF(ChlorDosingTube_Origin + [L_DosingConnectors + ShortTeeLength(ND_DeliveryPipe); 0 m; -.5*TeeLength(ND_DeliveryPipe)], L_ChlorTube, [0; -90]*deg, ND_DeliveryPipe, SDR_13.5)
ChlorElbowConnectorPipeBottom := PipeF(ChlorDeliveryPipe_Origin + [
    ElbowRadius(ND_DeliveryPipe);
    -sin(45 deg)*ElbowRadius(ND_DeliveryPipe);
    sin(45 deg)*ElbowRadius(ND_DeliveryPipe)
], 2*SocketDepth(ND_DeliveryPipe), [45; 90]*deg, ND_DeliveryPipe, SDR_13.5)
L_ChlorBridgeConnectorPipe := ChlorDosingTube_Origin[2] - ChlorDeliveryPipe_Origin[2] - .5*TeeLength(ND_DeliveryPipe) - L_ChlorTube - sin(45 deg)*(4*ElbowRadius(ND_DeliveryPipe) + 4*SocketDepth(ND_DeliveryPipe) + (1 - tan(22.5 deg))*ElbowRadius(ND_DeliveryPipe))
ChlorBridgeConnectorPipe := PipeF(ChlorDeliveryPipe_Origin + [
    ElbowRadius(ND_DeliveryPipe);
    -(sin(45 deg)*(ElbowRadius(ND_DeliveryPipe) + 2*SocketDepth(ND_DeliveryPipe)) + (1 - sin(45 deg))*ElbowRadius(ND_DeliveryPipe));
    sin(45 deg)*(ElbowRadius(ND_DeliveryPipe) + 2*SocketDepth(ND_DeliveryPipe)) + sin(45 deg)*ElbowRadius(ND_DeliveryPipe)
], L_ChlorBridgeConnectorPipe, [0; 90]*deg, ND_DeliveryPipe, SDR_13.5)
ChlorElbowConnectorPipeTop := PipeF(ChlorDosingTube_Origin + [
    L_DosingConnectors + ShortTeeLength(ND_DeliveryPipe);
    -sin(45 deg)*(2*SocketDepth(ND_DeliveryPipe) + (1 - tan(22.5 deg))*ElbowRadius(ND_DeliveryPipe)) - (1 - sin(45 deg))*ElbowRadius(ND_DeliveryPipe);
    -.5*TeeLength(ND_DeliveryPipe) - L_ChlorTube - sin(45 deg)*(2*SocketDepth(ND_DeliveryPipe) + (1 - tan(22.5 deg))*ElbowRadius(ND_DeliveryPipe) + ElbowRadius(ND_DeliveryPipe))
], 2*SocketDepth(ND_DeliveryPipe) + (1 - tan(22.5 deg))*ElbowRadius(ND_DeliveryPipe), [-45; 90]*deg, ND_DeliveryPipe, SDR_13.5)
ChlorDeliveryConnectorPipe := PipeF(ChlorDosingTube_Origin + [
    L_DosingConnectors + ShortTeeLength(ND_DeliveryPipe);
    0 m;
    -0.5*TeeLength(ND_DeliveryPipe) - 2*SocketDepth(ND_DeliveryPipe)
], 2*SocketDepth(ND_DeliveryPipe), [0; 90]*deg, ND_DeliveryPipe, SDR_13.5)
ChlorineDeliveryPipe := PipeF(ChlorDeliveryPipe_Origin, L_ChlorineDeliveryPipe, [0; 0]*deg, ND_DeliveryPipe, SDR_13.5)
ElbowCoagCHT := ElbowF(CoagDeliveryPipe_Origin + [-L_CoagDeliveryPipe; 0 m; 0 m], [90; 0; -90]*deg, ND_DeliveryPipe, SDR_13.5)
ElbowChlorCHT := ElbowF(ChlorDeliveryPipe_Origin + [-L_ChlorineDeliveryPipe; 0 m; 0 m], [90; 0; -90]*deg, ND_DeliveryPipe, SDR_13.5)
ElbowCoagDosing := ElbowF(CoagDeliveryPipe_Origin, [-90; 0; 90]*deg, ND_DeliveryPipe, SDR_13.5)
Angle_Elbow90ChlorDosing :=
    [-90; 0; 90]*deg if N_CoagTubes + N_ChlorTubes ≤ N_TubesTriggerStack or L_ChlorineDeliveryPipe > L_CoagDeliveryPipe + 2*(ElbowRadius(ND_DeliveryPipe) + SocketDepth(ND_DeliveryPipe))
    [-90; 0; 135]*deg otherwise
Elbow90ChlorDosing := ElbowF(ChlorDeliveryPipe_Origin, Angle_Elbow90ChlorDosing, ND_DeliveryPipe, SDR_13.5)
Elbow45ChlorDosingBottom := Elbow45F(ChlorDeliveryPipe_Origin + [
    ElbowRadius(ND_DeliveryPipe);
    -(ElbowRadius(ND_DeliveryPipe) + 2*sin(45 deg)*SocketDepth(ND_DeliveryPipe));
    sin(45 deg)*(2*ElbowRadius(ND_DeliveryPipe) + 2*SocketDepth(ND_DeliveryPipe))
], [0; 90; -90]*deg, ND_DeliveryPipe, SDR_13.5)
Elbow45ChlorDosingMiddle := Elbow45F(ChlorDosingTube_Origin + [
    L_DosingConnectors + ShortTeeLength(ND_DeliveryPipe);
    -sin(45 deg)*(2*SocketDepth(ND_DeliveryPipe) + (1 - tan(22.5 deg))*ElbowRadius(ND_DeliveryPipe)) - (1 - sin(45 deg))*ElbowRadius(ND_DeliveryPipe);
    -.5*TeeLength(ND_DeliveryPipe) - L_ChlorTube - sin(45 deg)*(2*SocketDepth(ND_DeliveryPipe) + (1 - tan(22.5 deg))*ElbowRadius(ND_DeliveryPipe) + ElbowRadius(ND_DeliveryPipe))
], [-135; 90; 0]*deg, ND_DeliveryPipe, SDR_13.5)
Elbow45ChlorDosingTop := Elbow45F(ChlorDosingTube_Origin + [
    L_DosingConnectors + ShortTeeLength(ND_DeliveryPipe);
    0 m;
    -.5*TeeLength(ND_DeliveryPipe) - L_ChlorTube
], [90; -90; 0]*deg, ND_DeliveryPipe, SDR_13.5)
# Option 1:Eliminate the top right elbow and modify the tee code and add a ball valve on top
# option 2: repla90 the top right elbow with a tee and ball valve without changing the tee code
ElbowCoagDosingBottomLeft := ElbowF(CoagDosingTube_Origin + [-L_CoagTube - L_DosingConnectors; 0 m; 0 m], [90; 0; -90]*deg, ND_DeliveryPipe, SDR_13.5)
ElbowChlorDosingBottomLeft := ElbowF(ChlorDosingTube_Origin + [-L_ChlorTube - L_DosingConnectors; 0 m; 0 m], [90; 0; -90]*deg, ND_DeliveryPipe, SDR_13.5)
TeeCoagDosingTopRight := TeeF(CoagDosingTube_Origin + [L_DosingConnectors; 0 m; B_DosingTubes*N_CoagTubes], [90; 0; -90]*deg, ND_DeliveryPipe, SDR_13.5)
TeeChlorDosingTopRight := TeeF(ChlorDosingTube_Origin + [L_DosingConnectors; 0 m; B_DosingTubes*N_ChlorTubes], [90; 0; -90]*deg, ND_DeliveryPipe, SDR_13.5)
CoagTees :=
    CoagTeeStack ← layer_new("CdcCoagTees", green)
    for i ∈ 0 .. max(N_CoagTubes - 1, 0)
        CoagTeeStack ← stack(CoagTeeStack, TeeF(CoagDosingTube_Origin + [L_DosingConnectors; 0 m; B_DosingTubes*i], [90; 0; 90]*deg, ND_DeliveryPipe, SDR_13.5))
        CoagTeeStack ← stack(CoagTeeStack, TeeF(CoagDosingTube_Origin + [-L_CoagTube - L_DosingConnectors; 0 m; B_DosingTubes*(i + 1)], [-90; 0; 90]*deg, ND_DeliveryPipe, SDR_13.5))
        i ← i + 1
    return CoagTeeStack
# Changed from N.CdcCoagTubes-2 to N.CdcCoagTubes-1
ChlorTees :=
    ChlorTeeStack ← layer_new("CdcChlorTees", green)
    for i ∈ 0 .. max(N_ChlorTubes - 1, 0)
        ChlorTeeStack ← stack(ChlorTeeStack, TeeF(ChlorDosingTube_Origin + [L_DosingConnectors; 0 m; B_DosingTubes*i], [90; 0; 90]*deg, ND_DeliveryPipe, SDR_13.5))
        ChlorTeeStack ← stack(ChlorTeeStack, TeeF(ChlorDosingTube_Origin + [-L_ChlorTube - L_DosingConnectors; 0 m; B_DosingTubes*(i + 1)], [-90; 0; 90]*deg, ND_DeliveryPipe, SDR_13.5))
        i ← i + 1
    return ChlorTeeStack
CdcCoagBallValve := insertdwg("https://confluence.cornell.edu/download/attachments/173604905/PvcBallValve+Scaled.dwg", CoagDosingTube_Origin + [L_PVCBallValve; 0 m; 0 m], ND_DeliveryPipe/(2 in), ND_DeliveryPipe/(2 in), 0 deg)
RotateCdcCoagBallValve := Rotate3DLast(CoagDosingTube_Origin + [L_PVCBallValve; 0 m; 0 m], "y", -90 deg)
ArrayCoagBallValve := ArrayLast(N_CoagTubes + 1, 1, B_DosingTubes)
MirrorCoagValves := Mirror3dAll("yz", [
    CoagDosingTube_Origin[0] - .5*L_CoagTube;
    CoagDosingTube_Origin[1];
    CoagDosingTube_Origin[2] + 1/4*H_Et + ShortTeeLength(ND_DeliveryPipe) + .5*ND_DeliveryPipe
], "n")
CdcCoagBallValveAir := insertdwg("https://confluence.cornell.edu/download/attachments/173604905/PvcBallValve+Scaled.dwg", CoagDosingTube_Origin + [
    L_PVCBallValve + ShortTeeLength(ND_DeliveryPipe) + SocketDepth(ND_DeliveryPipe);
    0 m;
    (N_CoagTubes + 1)*TeeLength(ND_DeliveryPipe) + ((2*N_CoagTubes + 1)*SocketDepth(ND_DeliveryPipe)) - ShortTeeLength(ND_DeliveryPipe)
], ND_DeliveryPipe/(2 in), ND_DeliveryPipe/(2 in), 90 deg)
CdcChlorineBallValve := insertdwg("https://confluence.cornell.edu/download/attachments/173604905/PvcBallValve+Scaled.dwg", ChlorDosingTube_Origin + [L_PVCBallValve; 0 m; 0 m], ND_DeliveryPipe/(2 in), ND_DeliveryPipe/(2 in), 0 deg)
RotateCdcChlorineBallValve := Rotate3DLast(ChlorDosingTube_Origin + [L_PVCBallValve; 0 m; 0 m], "y", -90 deg)  # Chlorine ball valves not showing up --> done
# All the choosing between max(N-1,1) are changed to N+1 to ensure that an extra tube is drawn in all cases. But some indices may have been messed up
ArrayChlorineBallValve := ArrayLast(N_ChlorTubes + 1, 1, B_DosingTubes)
# There is an extra tee being drawn on the top right side for both chlorine and coagulant, need to figure out how to get rid of it --> done
MirrorChlorineValves := Mirror3dAll("yz", [
    ChlorDosingTube_Origin[0] - .5*L_ChlorTube;
    ChlorDeliveryPipe_Origin[1];
    ChlorDeliveryPipe_Origin[2]
], "n")
CdcChlorineBallValveAir := insertdwg("https://confluence.cornell.edu/download/attachments/173604905/PvcBallValve+Scaled.dwg", ChlorDosingTube_Origin + [
    L_PVCBallValve + ShortTeeLength(ND_DeliveryPipe) + SocketDepth(ND_DeliveryPipe);
    0 m;
    (N_ChlorTubes + 1)*TeeLength(ND_DeliveryPipe) + ((2*N_ChlorTubes + 1)*SocketDepth(ND_DeliveryPipe)) - ShortTeeLength(ND_DeliveryPipe)
], ND_DeliveryPipe/(2 in), ND_DeliveryPipe/(2 in), 90 deg)
# Air removal ball valves position not right
ManifoldFitting_Script :=
    stack(CoagManifoldPluLayer, CoagConnectorPipe, view("f"), ArrayCoagConnectorPipe, MirrorCoagConnectorPipe, view("t"), CoagDeliveryConnectorPipe, CoagDeliveryPipe, FreezeCoagManifoldPlu, CoagManifoldPluLongLayer, CoagConnectorPipeLong, FreezeCoagManifoldPluLongLayer, ChlorManifoldPluLayer, ChlorConnectorPipe, view("f"), ArrayChlorConnectorPipe, MirrorChlorConnectorPipe, view("t"), ChlorConnectorPipeLong, ChlorDeliveryConnectorPipe, ChlorineDeliveryPipe, FreezeChlorManifoldPlu, ManifoldFittingsLayer, ElbowCoagCHT, ElbowChlorCHT, ElbowCoagDosing, Elbow90ChlorDosing, TeeCoagDosingTopRight, TeeChlorDosingTopRight, ElbowCoagDosingBottomLeft, ElbowChlorDosingBottomLeft, FreezeFittings, CoagTees, FreezeCoagTees, ChlorTees, FreezeChlorTees) if N_CoagTubes + N_ChlorTubes ≤ N_TubesTriggerStack or L_ChlorineDeliveryPipe > L_CoagDeliveryPipe + 2*(ElbowRadius(ND_DeliveryPipe) + SocketDepth(ND_DeliveryPipe))
    stack(CoagManifoldPluLayer, CoagConnectorPipe, view("f"), ArrayCoagConnectorPipe, MirrorCoagConnectorPipe, view("t"), CoagDeliveryConnectorPipe, CoagDeliveryPipe, FreezeCoagManifoldPlu, CoagManifoldPluLongLayer, CoagConnectorPipeLong, FreezeCoagManifoldPluLongLayer, ChlorManifoldPluLayer, ChlorConnectorPipe, view("f"), ArrayChlorConnectorPipe, MirrorChlorConnectorPipe, view("t"), ChlorConnectorPipeLong, ChlorElbowConnectorPipeBottom, ChlorBridgeConnectorPipe, ChlorElbowConnectorPipeTop, ChlorDeliveryConnectorPipe, ChlorineDeliveryPipe, FreezeChlorManifoldPlu, ManifoldFittingsLayer, ElbowCoagCHT, ElbowChlorCHT, ElbowCoagDosing, Elbow90ChlorDosing, Elbow45ChlorDosingBottom, Elbow45ChlorDosingMiddle, Elbow45ChlorDosingTop, TeeCoagDosingTopRight, TeeChlorDosingTopRight, ElbowCoagDosingBottomLeft, ElbowChlorDosingBottomLeft, FreezeFittings, CoagTees, FreezeCoagTees, ChlorTees, FreezeChlorTees) otherwise
ManifoldValve_Script := stack(ManifoldCoagValveLayer, CdcCoagBallValve, RotateCdcCoagBallValve, view("f"), ArrayCoagBallValve, MirrorCoagValves, view("t"), CdcCoagBallValveAir, FreezeCoagValvesLayer, ManifoldChlorValveLayer, CdcChlorineBallValve, RotateCdcChlorineBallValve, view("f"), ArrayChlorineBallValve, MirrorChlorineValves, view("t"), CdcChlorineBallValveAir, FreezeChlorValvesLayer)
Manifold_Script := stack(ManifoldFitting_Script, ManifoldValve_Script)
# Manifold
# Dosing Tubes
L_CoagTube = 0.981625 m
D_CoagTubeStockToCHEst = 0.140364 in
N_CoagTubes = 4
L_ChlorTube = 1.34767 m
D_ChlorTubeStockToCHEst = 0.139736 in
N_ChlorTubes = 4
DosingTubesLayer := layer_new("CdcDosingPlu", red)
CoagTube := PipeF(CoagDosingTube_Origin, L_CoagTube, [0; 0]*deg, D_CoagTubeStockToCHEst, PS_FlexTube)
ViewFront := view("f")
ArrayCoagTube := ArrayLast(max(N_CoagTubes, 2), 1, B_DosingTubes)
ArrayCoagTube_test := ArrayLast(N_CoagTubes + 1, 1, B_DosingTubes)
ViewTop := view("t")
ChlorineTube := PipeF(ChlorDosingTube_Origin, L_ChlorTube, [0; 0]*deg, D_ChlorTubeStockToCHEst, PS_FlexTube)
ArrayChlorineTube := ArrayLast(max(N_ChlorTubes, 2), 1, B_DosingTubes)
ArrayChlorineTube_test := ArrayLast(N_ChlorTubes + 1, 1, B_DosingTubes)
FreezeDosingTubes := FreezeLayer("CdcDosingPlu")
Dosing_Script := stack(DosingTubesLayer, CoagTube, ViewFront, ArrayCoagTube_test, ViewTop, ChlorineTube, ViewFront, ArrayChlorineTube_test, ViewTop, FreezeDosingTubes)
# Calibration Column Definitions
SF_CalCol := 1.25
Ti_Res := 1.25*min
H_CalCol := 30 cm
Q_CoagCalColMax := SF_CalCol*Q_CoagMax
Vol_CoagCalCol := Ti_Res*Q_CoagCalColMax
D_inCoagCCMin := sqrt(4*Vol_CoagCalCol/(π*H_CalCol)) = 2.49048 in
ND_CoagCalCol := ND(D_inCoagCCMin, Sch40)
D_inCoagCalCol := ID(ND_CoagCalCol, Sch40) = 0.269 in
Q_ChlorCalColMax := SF_CalCol*Q_ChlorMax
Vol_ChlorCalCol := Ti_Res*Q_ChlorCalColMax
D_inChlorCCMin := sqrt(4*Vol_ChlorCalCol/(π*H_CalCol)) = 2.47354 in
ND_ChlorCalCol := ND(D_inChlorCCMin, Sch40)
D_inChlorCalCol := ID(ND_ChlorCalCol, Sch40) = 0.269 in
Q_FCCalColMax := SF_CalCol*Q_CoagMax
Vol_FCCalCol := Ti_Res*Q_FCCalColMax
D_inFCCCMin := sqrt(4*Vol_FCCalCol/(π*H_CalCol)) = 2.49048 in
ND_FCCalCol := ND(D_inFCCCMin, Sch40)
D_inFCCalCol := ID(ND_FCCalCol, Sch40) = 0.269 in
R_Cylinder := .5 cm
# Calibration Column Origin Points
# Z_CoagulantOutlet | was set equal to Z.FloatTop
CoagCalCol_Origin := [
    ChemPlatform_Origin[0] + ChemPlatform_Dimensions[0] + T_PlantWall + OR_Fitting(ND_CoagCalCol);
    CHT2_Origin[1] - 2*OR_Fitting(ND_CoagCalCol) - 1/2*D_CHT - 2*zc;
    Z_FloatTop
]
CoagTopCap_Origin := [CoagCalCol_Origin[0]; CoagCalCol_Origin[1]; CoagCalCol_Origin[2] + H_CalCol]
ChlorCalCol_Origin := [
    CoagCalCol_Origin[0] - OR_Fitting(ND_CoagCalCol) + OR_Fitting(ND_ChlorCalCol);
    CoagCalCol_Origin[1] - 2*zc - 2*OR_Fitting(ND_CoagCalCol) - OR_Fitting(ND_ChlorCalCol);
    Z_FloatTop
]
ChlorTopCap_Origin := [ChlorCalCol_Origin[0]; ChlorCalCol_Origin[1]; ChlorCalCol_Origin[2] + H_CalCol]
# To draw the hole in the top cap, we are subtracting a cylinder from the top cap layer
CoagCylinder_Origin := [CoagCalCol_Origin[0]; CoagCalCol_Origin[1]; CoagCalCol_Origin[2] + H_CalCol/2]
ChlorCylinder_Origin := [ChlorCalCol_Origin[0]; ChlorCalCol_Origin[1]; ChlorCalCol_Origin[2] + H_CalCol/2]
# Calibration Column and Constant Head Tanks
MakeCalColLayer := layer_new("CdcCalColumnPlu", ltpurple)
MainCoagCalCol := PipeF(CoagCalCol_Origin, H_CalCol, [0; 90]*deg, ND_CoagCalCol, Sch40)
MainChlorCalCol := PipeF(ChlorCalCol_Origin, H_CalCol, [0; 90]*deg, ND_ChlorCalCol, Sch40)
CHT1 := ConstantHeadTankF(CHT_Origin, [90; 0; 90]*deg, D_CHT/2, H_CHT, T_CHTwall, .75*H_CHT, 1/3*in, 1/3*in, 1/3*in, 1/3*in)
CHT2 := ConstantHeadTankF(CHT2_Origin, [90; 0; 90]*deg, D_CHT/2, H_CHT, T_CHTwall, .75*H_CHT, 1/3*in, 1/3*in, 1/3*in, 1/3*in)
CHT3 := ConstantHeadTankF(CHT3_Origin, [90; 0; 90]*deg, D_CHT/2, H_CHT, T_CHTwall, .75*H_CHT, 1/3*in, 1/3*in, 1/3*in, 1/3*in)
CHT4 := ConstantHeadTankF(CHT4_Origin, [90; 0; 90]*deg, D_CHT/2, H_CHT, T_CHTwall, .75*H_CHT, 1/3*in, 1/3*in, 1/3*in, 1/3*in)
FreezeCalCol := FreezeLayer("CdcCalColumnPlu")
MakeCapsLayer := layer_new("CdcColumnCapsPlu", blue2)
CoagTopCap := CapF(CoagTopCap_Origin, [0; -90]*deg, ND_CoagCalCol)
CoagBottomCap := CapF(CoagTopCap_Origin - [0 m; 0 m; H_CalCol], [0; 90]*deg, ND_CoagCalCol)
ChlorTopCap := CapF(ChlorTopCap_Origin, [0; -90]*deg, ND_ChlorCalCol)
ChlorBottomCap := CapF(ChlorTopCap_Origin - [0 m; 0 m; H_CalCol], [0; 90]*deg, ND_ChlorCalCol)
FreezeCapsLayer := FreezeLayer("CdcColumnCapsPlu")
DrawCoagCylinder := CylinderF(CoagCylinder_Origin, R_Cylinder, H_CalCol, [0; 90]*deg)
DrawChlorCylinder := CylinderF(ChlorCylinder_Origin, R_Cylinder, H_CalCol, [0; 90]*deg)
LayCylinder := GroupAll("DeleteMe")
MakeHole := SubtractF(["CdcColumnCapsPlu"], "DeleteMe")
CdcCalColumn2_Script := stack(MakeCalColLayer, MainCoagCalCol, MainChlorCalCol, CHT1, CHT2, CHT3, CHT4, FreezeCalCol, MakeCapsLayer, CoagTopCap, CoagBottomCap, ChlorTopCap, ChlorBottomCap, FreezeCapsLayer, DrawCoagCylinder, DrawChlorCylinder, LayCylinder, MakeHole)
CdcCalColumn1_Script := stack(MakeCalColLayer, MainChlorCalCol, CHT1, FreezeCalCol, MakeCapsLayer, ChlorTopCap, ChlorBottomCap, FreezeCapsLayer, DrawChlorCylinder, CHT2, LayCylinder, MakeHole)
drawthelever := stack(AC_EntranceTank, LeverArmCHT2_Script)
AC_Cdc2 := stack(Cdc2_Script, Dosing_Script, Manifold_Script, CdcCalColumn2_Script)
# [component: inputs drawthelever]
AC_Cdc1 := stack(Cdc1_Script, Dosing_Script, Manifold_Script, CdcCalColumn1_Script)
AC_Cdc := AC_Cdc2
drawmenow := stack(AC_EntranceTank, AC_Cdc)
AC_OperatorAccess
Drawing := stack(EtTankScript, AC_Cdc, AC_ChemTanks)  # AC_ChemTanks
AC_ChemTanks
AltDrawing := stack(EtTankScript, AC_Cdc1, AC_ChemTanks)
AC_OperatorAccess
# [component: inputs drawmenow]
