# References
Q_Plant := 10*L/s
HL_FlocMax := 40 cm
H_SedSlopesToFlocWeirMin := 25 cm
T_FlocSlab := 15 cm
T_SedWall := 15 cm
T_SedDividingWall := 15 cm
T_SedChannelWall := 15 cm
T_FlocWall := 15 cm
T_FlocDividingWall := 15 cm
T_FiWall := 25 cm
T_FiBoxWall := 15 cm
T_PlantWall := 15 cm
T_PlantFloor := 20 cm
T_ChemSlab := 15 cm
T_DrainChannelWall := 15 cm
C_CoagDoseMax := 40*mg/L
C_ChlorDoseAve := 1*mg/L
# Mathcad to AutoCAD translators:
# [reference: MtoATranslators.xmcd]
# The wrapped MtoA translator contains the functions that the user will want to access. These functions will draw pieces with full functionality - specifying the location, dimension, and orientation of the object. Also, it contains layer control and subtraction capabilities for grouped objects.
# [reference: MtoATranslatorsWrapped.xmcd]
# Plant design calculations:
# [reference: ExpertInputs.xmcd]
# [reference: MathFunctions.xmcd]
# [reference: PipeDatabase_st587.xmcd]
# [reference: MaterialsDatabase.xmcd]
# [reference: FluidsFunctions.xmcd]
# [reference: SedimentationTank.xmcd]
# [reference: LFOM.xmcd]
# [reference: FlocculatorEntranceTank.xmcd]
# [reference: StackedRapidSandFilter.xmcd]
# [reference: ChemicalDoseController_st587.xmcd]
# AutoCAD drawing functions:
# [reference: ChannelF.xmcd]
# [reference: PlumbingF.xmcd]
# [reference: TankF.xmcd]
# [reference: StairsF.xmcd]
# [reference: DrainChannelF.xmcd]
# AutoCAD script files:
# [reference: FlocculatorAC.xmcd]
# [reference: SedimentationTankAC.xmcd]
# [reference: EntranceTankCompactAC_st587.xmcd]
# [reference: StackedRapidSandFilterAC.xmcd]
# [reference: ChemStockTanksAC.xmcd]
# [reference: OperatorAccessAC.xmcd]
# Width and length of the chemical platform are defined in ChemStockTanksAC
ChemPlatform_Origin := [
    CoagTank_Origin[0] + R_CoagTank + T_ChemTankWall + S_ChemTankBorder - L_ChemPlatform;
    Et_Origin[1] + W_Et + T_PlantWall - W_ChemPlatform;
    CoagTank_Origin[2] - T_ChemTankWall - T_PlantWall
]
ChemPlatform_Dimensions := [L_ChemPlatform; W_ChemPlatform; T_PlantWall]
# Chemical Dose Controller
# Layers
# Lever Arm Layers
CdcLeverLayer := layer_new("CdcLever", ltgrey)
SelectCdcLever := SelectLayer("CdcLever")
CdcLeverFrz := FreezeLayer("CdcLever")
ThawCdcLever := ThawMultiple(["CdcLever"])
CdcLeverMountingLayer := layer_new("CdcLeverMounting", ltgrey)
SelectCdcLeverMounting := SelectLayer("CdcLeverMounting")
CdcLeverMountingFrz := FreezeLayer("CdcLeverMounting")
CdcLeverSliderLayer := layer_new("CdcLeverSlider", ltgrey)
SelectCdcSliderLever := SelectLayer("CdcLeverSlider")
CdcLeverSliderFrz := FreezeLayer("CdcLeverSlider")
ThawCdcLeverSlider := ThawMultiple(["CdcLeverSlider"])
CdcFloatLayer := layer_new("CdcFloat", red)
SelectCdcFloat := SelectLayer("CdcFloat")
CdcFloatFrz := FreezeLayer("CdcFloat")
CdcLeverFittingsLayer := layer_new("CdcLeverFittings", green)
SelectCdcLeverFittings := SelectLayer("CdcLeverFittings")
CdcLeverFittingsFrz := FreezeLayer("CdcLeverFittings")
ThawCdcLeverFittings := ThawMultiple(["CdcLeverFittings"])
CdcLeverPluLayer := layer_new("CdcLeverPlu", blue)
SelectCdcLeverPlu := SelectLayer("CdcLeverPlu")
CdcLeverPluFrz := FreezeLayer("CdcLeverPlu")
ThawCdcLeverPlu := ThawMultiple(["CdcLeverPlu"])
# Manifold Layers
CdcCoagManifoldPluLayer := layer_new("CdcCoagManifoldPlu", blue)
SelectCdcCoagManifoldPlu := SelectLayer("CdcCoagManifoldPlu")
CdcCoagManifoldPluFrz := FreezeLayer("CdcCoagManifoldPlu")
CdcChlorManifoldPluLayer := layer_new("CdcChlorManifoldPlu", blue)
SelectCdcChlorManifoldPlu := SelectLayer("CdcChlorManifoldPlu")
CdcChlorManifoldPluFrz := FreezeLayer("CdcChlorManifoldPlu")
CdcManifoldFittingsLayer := layer_new("CdcManifoldFittings", green)
SelectCdcManifoldFittings := SelectLayer("CdcManifoldFittings")
CdcManifoldFittingsFrz := FreezeLayer("CdcManifoldFittings")
CdcCoagTeesLayer := layer_new("CdcCoagTees", green)
SelectCdcCoagTees := SelectLayer("CdcCoagTees")
CdcCoagTeesFrz := FreezeLayer("CdcCoagTees")
CdcChlorTeesLayer := layer_new("CdcChlorTees", green)
SelectCdcChlorTees := SelectLayer("CdcChlorTees")
CdcChlorTeesFrz := FreezeLayer("CdcChlorTees")
CdcCoagManifoldValvesLayer := layer_new("CdcCoagManifoldValves", ltgrey)
SelectCdcCoagManifoldValves := SelectLayer("CdcCoagManifoldValves")
CdcCoagManifoldValvesFrz := FreezeLayer("CdcCoagManifoldValves")
CdcChlorManifoldValvesLayer := layer_new("CdcChlorManifoldValves", ltgrey)
SelectCdcChlorManifoldValves := SelectLayer("CdcChlorManifoldValves")
CdcChlorManifoldValvesFrz := FreezeLayer("CdcChlorManifoldValves")
CdcDosingTubesLayer := layer_new("CdcDosingPlu", red)
SelectCdcDosingTubes := SelectLayer("CdcDosingPlu")
CdcDosingTubesFrz := FreezeLayer("CdcDosingPlu")
# Dimensions
# Constant Head Tank Dimensions
# five gallons bucket dimensions for constant head tanks
D_CHT := 30/3*cm
H_CHT := 37/3*cm
T_CHTwall := 1/3*cm
ND_DeliveryPipe := 0.5 in  # based on measurements in the lab and the system in Atima
PS_FlexTube := 2
L_PVCBallValveOLD := .1625 m/2
L_PVCBallValve := .1625 m/4
B_DosingTubes := max(TeeLength(ND_DeliveryPipe) + 2*SocketDepth(ND_DeliveryPipe), 2*ElbowRadius(ND_DeliveryPipe) + 2*SocketDepth(ND_DeliveryPipe))
# This needs to be changed in the entire code bc this is confusing
T_MountingBoard := 1.5 in
L_CoagDeliveryPipe.Old := L_CoagTube + 2*L_PVCBallValve + 2*ShortTeeLength(ND_DeliveryPipe) + ElbowRadius(ND_DeliveryPipe) + OR_Fitting(ND_DeliveryPipe)
L_ChlorDeliveryPipeOLD := L_ChlorTube + 2*L_PVCBallValve + 2*ShortTeeLength(ND_DeliveryPipe) + ElbowRadius(ND_DeliveryPipe) + OR_Fitting(ND_DeliveryPipe)
L_DosingConnectors := L_PVCBallValve + SocketDepth(ND_DeliveryPipe)
CdcLeverArm_Origin[0] + S_CdcLevertoManifold + OR_Fitting(ND_DeliveryPipe) + 2*ShortTeeLength(ND_DeliveryPipe) + 2*L_PVCBallValve + L_ChlorTube + 2*SocketDepth(ND_DeliveryPipe) - ElbowRadius(ND_DeliveryPipe)
# Lever Dimensions
L_CdcLeverArm := 0.5 m
# Perpendicular distance from LeverArm.Origin to the Float Cable
L_CdcLeverHoriz := (L_CdcLeverArm^2 - HL_Lfom^2)^.5 = 0.458258 m
# Maybe I can delete these since the lever is rotated
L_CdcLeverVert := HL_Lfom = 0.2 m  # Distance from the top most part of the Lever Arm on an angle to the height of the Lever Arm Pivot
AN_CdcLever := asin(HL_Lfom/L_CdcLever)/deg = 23.5782
L_CdcLeverCylinder := 6 in
D_CdcLeverCylinder1 := 1 in  # Should be moved to expert inputs
L_EtFrontWallToCdcFloat := 0.874 m
D_CdcLeverCylinder4 := 2 in
D_CdcLeverCylinder2 := 0.5 in
# idk if this is defined or calculated in a dif file but i cant find it in
# expert inputs
L_CdcLeverPivottoCylinder2 := 6 cm
L_CdcLeverCylinder2to3 := 9.5 cm
L_CdcLeverPivotBox := 2 in
W_CdcLeverPivotBox := 1 in
H_CdcLeverPivotBox := 1 in
T_CdcLeverArm := 1/8*in
H_CdcLeverArm := 1 in
L_CdcLeverSliderOriginToScrew := 1 in
L_CdcLeverInnerBar := 7 in
T_CdcLeverSlider := 1/4*in
L_CdcLeverMountingPlate := 6 in
H_CdcLeverSlider := 1.5 in
W_CdcLeverMountingPlate := 0.5 cm
H_CdcLeverMountingPlate := 2 in
L_CdcLeverSlider := 3 in
S_LeverToEtZTop := 1 cm
T_CdcFloat := 5 cm
H_CdcLeverSliderShort := 1/8*in
D_CdcFloatCable := 0.5 cm
L_CdcLeverArmExtended := L_CdcLeverSlider + D_CdcLeverCylinder4 - L_CdcLeverSliderOriginToScrew = 4 in
# Manifold Dimensions
S_CdcLevertoManifold := 40 cm
L_ChlorAirReleasePipe := 30 cm  # Arbitratily selected
L_CoagDeliveryConnectorPipeLong := SocketDepth(ND_DeliveryPipe) + S_Fitting + ElbowRadius(ND_DeliveryPipe) + OR(ND_DeliveryPipe) = 0.092418 m
# Origin Points
# Lever Origin Points
# the x and y coordinates of LA.Origin were changed to those of the DosingSubBox.Origin
CdcLeverArm_Origin := [
    DosingSubBox_Origin[0] + OR(ND_EtFloat) - L_CdcLeverCylinder/2 - T_CdcLeverArm;
    Et_Origin[1] + W_Et + T_FlocWall - W_CdcLeverPivotBox/2;
    Z_EtTop + S_LeverToEtZTop
] = [-3.61705; 4.9773; 2.64315] m
CdcLeverArm2_Origin := [
    CdcLeverArm_Origin[0] + L_CdcLeverCylinder + T_CdcLeverArm;
    CdcLeverArm_Origin[1];
    CdcLeverArm_Origin[2]
] = [-3.46147; 4.9773; 2.64315] m
CdcLeverDropTubeScrew_Origin := [
    CdcLeverArm_Origin[0] - T_CdcLeverSlider;
    CdcLeverArm_Origin[1] + L_CdcLeverArm;
    CdcLeverArm_Origin[2] + H_CdcLeverArm/2
] = [-3.6234; 5.4773; 2.65585] m
CdcLeverDropTubeScrew2_Origin := [
    CdcLeverDropTubeScrew_Origin[0] + T_CdcLeverSlider + T_CdcLeverArm + L_CdcLeverCylinder + T_CdcLeverArm + T_CdcLeverSlider;
    CdcLeverDropTubeScrew_Origin[1];
    CdcLeverDropTubeScrew_Origin[2]
] = [-3.45195; 5.4773; 2.65585] m
CdcLeverDropTubeTee_Origin := [
    CdcLeverDropTubeScrew_Origin[0] - OD(ND_DropTube)/2 - T_CdcLeverSlider - ShortTeeLength(ND_DropTube) + (OD_Fitting(ND_DeliveryPipe)/2 - OD(ND_DeliveryPipe)/2);
    CdcLeverDropTubeScrew_Origin[1];
    CdcLeverDropTubeScrew_Origin[2] - SocketDepth(ND_DropTube) - TeeLength(ND_DropTube)/2
] = [-3.65194; 5.4773; 2.6241] m
CdcLeverDropTube2Tee_Origin := [
    CdcLeverDropTubeScrew2_Origin[0] + OD(ND_DropTube)/2 + T_CdcLeverSlider + ShortTeeLength(ND_DropTube) - (OD_Fitting(ND_DeliveryPipe)/2 - OD(ND_DeliveryPipe)/2);
    CdcLeverDropTubeScrew2_Origin[1];
    CdcLeverDropTubeScrew2_Origin[2] - SocketDepth(ND_DropTube) - TeeLength(ND_DropTube)/2
]
CdcLeverDropTube_Origin := [
    CdcLeverDropTubeTee_Origin[0] + ShortTeeLength(ND_DropTube);
    CdcLeverDropTubeTee_Origin[1];
    CdcLeverDropTubeTee_Origin[2]
]
CdcLeverDropTube2_Origin := [
    CdcLeverDropTube2Tee_Origin[0] - ShortTeeLength(ND_DropTube);
    CdcLeverDropTube2Tee_Origin[1];
    CdcLeverDropTube2Tee_Origin[2]
]
CdcLeverSlider2_Origin := [
    CdcLeverDropTubeScrew2_Origin[0];
    CdcLeverDropTubeScrew2_Origin[1] - L_CdcLeverSliderOriginToScrew;
    CdcLeverDropTubeScrew2_Origin[2] + H_CdcLeverSlider/2
] = [-3.45195; 5.4519; 2.6749] m
CdcLeverSlider1_Origin := [
    CdcLeverDropTubeScrew_Origin[0];
    CdcLeverDropTubeScrew_Origin[1] - L_CdcLeverSliderOriginToScrew;
    CdcLeverDropTubeScrew_Origin[2] + H_CdcLeverSlider/2
] = [-3.6234; 5.4519; 2.6749] m
CdcLeverSliderMiddleTop_Origin := [CdcLeverSlider1_Origin[0] + T_CdcLeverSlider; CdcLeverSlider1_Origin[1]; CdcLeverSlider1_Origin[2]] = [-3.61705; 5.4519; 2.6749] m
CdcLeverSliderMiddleTop2_Origin := [CdcLeverSlider2_Origin[0] - T_CdcLeverSlider; CdcLeverSlider2_Origin[1]; CdcLeverSlider2_Origin[2]] = [-3.4583; 5.4519; 2.6749] m
CdcLeverSliderMiddleBot_Origin := [
    CdcLeverSliderMiddleTop_Origin[0];
    CdcLeverSliderMiddleTop_Origin[1];
    CdcLeverSliderMiddleTop_Origin[2] - H_CdcLeverSlider + T_CdcLeverSlider
] = [-3.61705; 5.4519; 2.64315] m
CdcLeverSliderMiddleBot2_Origin := [
    CdcLeverSliderMiddleTop2_Origin[0];
    CdcLeverSliderMiddleTop2_Origin[1];
    CdcLeverSliderMiddleTop2_Origin[2] - H_CdcLeverSlider + T_CdcLeverSlider
] = [-3.4583; 5.4519; 2.64315] m
CdcLeverSliderInnerTop_Origin := [
    CdcLeverSliderMiddleTop_Origin[0] + T_CdcLeverArm;
    CdcLeverSliderMiddleTop_Origin[1];
    CdcLeverSliderMiddleTop_Origin[2]
] = [-3.61387; 5.4519; 2.6749] m
CdcLeverSliderInnerTop2_Origin := [
    CdcLeverSliderMiddleTop2_Origin[0] - T_CdcLeverArm;
    CdcLeverSliderMiddleTop2_Origin[1];
    CdcLeverSliderMiddleTop2_Origin[2]
] = [-3.46147; 5.4519; 2.6749] m
CdcLeverSliderInnerBot_Origin := [
    CdcLeverSliderInnerTop_Origin[0];
    CdcLeverSliderInnerTop_Origin[1];
    CdcLeverSliderInnerTop_Origin[2] - H_CdcLeverSlider + 2*T_CdcLeverSlider
] = [-3.61387; 5.4519; 2.6495] m
CdcLeverSliderInnerBot2_Origin := [
    CdcLeverSliderInnerTop2_Origin[0];
    CdcLeverSliderInnerTop2_Origin[1];
    CdcLeverSliderInnerTop2_Origin[2] - H_CdcLeverSlider + 2*T_CdcLeverSlider
] = [-3.46147; 5.4519; 2.6495] m
CdcLeverPivotBox_Origin := [
    (CdcLeverArm_Origin[0] + L_CdcLeverCylinder/3) + T_CdcLeverArm;
    CdcLeverArm_Origin[1] + W_CdcLeverPivotBox/2;
    Z_EtTop + H_CdcLeverPivotBox
]
CdcFloat_Origin := [
    DosingSubBox_Origin[0] + OR(ND_EtFloat);
    CdcLeverArm_Origin[1] - L_CdcLeverHoriz - D_CdcLeverCylinder1/4;
    ZW_EtMax - T_CdcFloat/2
] = [-3.53767; 4.51269; 2.50815] m
# Dosing Tube Origins
N_TubesTriggerStack := 2
L_CoagDeliveryPipe := S_CdcLevertoManifold + OR_Fitting(ND_DeliveryPipe) + 2*ShortTeeLength(ND_DeliveryPipe) + 2*L_PVCBallValve + L_CoagTube + 2*SocketDepth(ND_DeliveryPipe) - 2*ElbowRadius(ND_DeliveryPipe) + (OR(ND_DeliveryPipe) + ShortTeeLength(ND_DeliveryPipe) + SocketDepth(ND_DeliveryPipe) + L_PVCBallValve + S_Fitting) + (OR(ND_DeliveryPipe) + S_Fitting + ElbowRadius(ND_DeliveryPipe))
L_ChlorDeliveryPipe := S_CdcLevertoManifold + OR_Fitting(ND_DeliveryPipe) + 2*ShortTeeLength(ND_DeliveryPipe) + 2*L_PVCBallValve + L_ChlorTube + 2*SocketDepth(ND_DeliveryPipe) - 2*ElbowRadius(ND_DeliveryPipe)
# The first case triggers when both N values are equalt to 1, in other words when there are
# two Coag dosing tubes and two Chlor dosing tubes. This case will stack the dosing manifolds.
ChlorDeliveryPipe_Origin :=
    if N_CoagTubes + N_ChlorTubes ≤ N_TubesTriggerStack
        [
            L_ChlorDeliveryPipe;
            CdcLeverArm_Origin[1] + OR_Fitting(ND_DeliveryPipe);
            Z_Walkway + 1.5*OR_Fitting(ND_DeliveryPipe) + (N_CoagTubes + 2)*B_DosingTubes + ElbowRadius(ND_DeliveryPipe) + SocketDepth(ND_DeliveryPipe)
        ]
    if L_CoagDeliveryPipe ≤ L_ChlorDeliveryPipe
        [
            DosingSubBox_Origin[0] - ElbowRadius(ND_DeliveryPipe) + 2*OR_Fitting(ND_EtFloat) + L_ChlorDeliveryPipe;
            CdcLeverArm_Origin[1] + OR_Fitting(ND_DeliveryPipe);
            Z_Walkway + OR_Fitting(ND_DeliveryPipe) + S_Fitting
        ]
    otherwise
        [
            DosingSubBox_Origin[0] - ElbowRadius(ND_DeliveryPipe) + OR_Fitting(ND_EtFloat) + L_ChlorDeliveryPipe;
            CdcLeverArm_Origin[1] + OR_Fitting(ND_DeliveryPipe);
            Z_Walkway + 1.5*OR_Fitting(ND_DeliveryPipe) - ((-ElbowRadius(ND_DeliveryPipe) - OR_Fitting(ND_DeliveryPipe)/2 + 2*SocketDepth(ND_DeliveryPipe) + .5*TeeLength(ND_DeliveryPipe)) - S_Fitting - 2*OR_Fitting(ND_DeliveryPipe))
        ]
# The second case will nest the dosing manifolds with the chlorine delivery pipe on the bottom.
# The third case will nest the dosing manifolds with the coagulant delivery pipe on the bottom.
ChlorDosingTube_Origin :=
    if N_CoagTubes + N_ChlorTubes ≤ N_TubesTriggerStack
        ChlorDeliveryPipe_Origin + [
            ElbowRadius(ND_DeliveryPipe) - L_ChlorTube - L_PVCBallValve - SocketDepth(ND_DeliveryPipe) - ShortTeeLength(ND_DeliveryPipe);
            0 m;
            L_CoagDeliveryConnectorPipeLong + ElbowRadius(ND_DeliveryPipe) + 2*SocketDepth(ND_DeliveryPipe) + .5*TeeLength(ND_DeliveryPipe) + 2*OR_Fitting(ND_DeliveryPipe)
        ]
    otherwise
        ChlorDeliveryPipe_Origin + [
            ElbowRadius(ND_DeliveryPipe) - L_ChlorTube - L_PVCBallValve - SocketDepth(ND_DeliveryPipe) - ShortTeeLength(ND_DeliveryPipe);
            0 m;
            2*OR(ND_DeliveryPipe) + 2*S_Fitting + 2*ElbowRadius(ND_DeliveryPipe) + L_CoagDeliveryConnectorPipeLong + N_CoagTubes*(TeeLength(ND_DeliveryPipe) + 2*SocketDepth(ND_DeliveryPipe))
        ]
2*OR(ND_DeliveryPipe) + S_Fitting + 2*ElbowRadius(ND_DeliveryPipe) + L_CoagDeliveryConnectorPipeLong + N_CoagTubes*(TeeLength(ND_DeliveryPipe) + 2*SocketDepth(ND_DeliveryPipe))
L_CoagDeliveryConnectorPipeLong + ElbowRadius(ND_DeliveryPipe) + S_Fitting + N_CoagTubes*(TeeLength(ND_DeliveryPipe) + 2*SocketDepth(ND_DeliveryPipe)) + 2*SocketDepth(ND_DeliveryPipe) + 2*OR(ND_DeliveryPipe)
OffsetCoagChlor :=
    if N_CoagTubes + N_ChlorTubes ≤ N_TubesTriggerStack
        [
            0 m;
            0 m;
            -((N_CoagTubes + 2)*B_DosingTubes + ElbowRadius(ND_DeliveryPipe) + SocketDepth(ND_DeliveryPipe) - 2*OR_Fitting(ND_DeliveryPipe))
        ]
    if L_CoagDeliveryPipe ≤ L_ChlorDeliveryPipe
        [
            OR(ND_DeliveryPipe) + L_PVCBallValve + SocketDepth(ND_DeliveryPipe) + ShortTeeLength(ND_DeliveryPipe) + S_Fitting;
            0 m;
            -S_Fitting - ElbowRadius(ND_DeliveryPipe) - N_CoagTubes*(TeeLength(ND_DeliveryPipe) + 2*SocketDepth(ND_DeliveryPipe)) + 0.5*TeeLength(ND_DeliveryPipe)
        ]
    otherwise
        [
            OR(ND_DeliveryPipe) + L_PVCBallValve + SocketDepth(ND_DeliveryPipe) + ShortTeeLength(ND_DeliveryPipe) + S_Fitting;
            0 m;
            (-S_Fitting - ElbowRadius(ND_DeliveryPipe) - N_CoagTubes*(TeeLength(ND_DeliveryPipe) + 2*SocketDepth(ND_DeliveryPipe))) + 0.5*TeeLength(ND_DeliveryPipe)
        ]
CdcLeverArm_Origin = [-3.61705; 4.9773; 2.64315] m
CoagDosingTube_Origin := OffsetCoagChlor + ChlorDosingTube_Origin
CoagDeliveryPipe_Origin := CoagDosingTube_Origin + [
    -ElbowRadius(ND_DeliveryPipe) + ShortTeeLength(ND_DeliveryPipe) + SocketDepth(ND_DeliveryPipe) + L_PVCBallValve + L_CoagTube;
    0 m;
    -ElbowRadius(ND_DeliveryPipe) - L_CoagDeliveryConnectorPipeLong - .5*TeeLength(ND_DeliveryPipe)
] = [-1.35841; 4.99119; 1.49181] m
# Constant Head Tank Origins
CHT_Origin := [
    ChemPlatform_Origin[0] + ChemPlatform_Dimensions[0] + T_PlantWall + 1/2*D_CHT;
    ChemPlatform_Origin[1] - 1/2*D_CHT + ChemPlatform_Dimensions[1] - T_PlantWall;
    ZW_CdcCht
] = [-5.42742; 4.79; 2.70085] m
CHT2_Origin := [CHT_Origin[0]; CHT_Origin[1] - 1.5*D_CHT; CHT_Origin[2]]
CHT3_Origin := [CHT_Origin[0]; CHT2_Origin[1] - 1.5*D_CHT; CHT_Origin[2]]
CHT4_Origin := [CHT_Origin[0]; CHT3_Origin[1] - 1.5*D_CHT; CHT_Origin[2]]
# Lever
# Lever Arms
CdcLeverArm1 := BoxF([
    CdcLeverArm_Origin[0] + T_CdcLeverArm;
    CdcLeverArm_Origin[1] - L_CdcLeverArm - D_CdcLeverCylinder1/2;
    CdcLeverArm_Origin[2]
], [
    CdcLeverArm_Origin[0];
    CdcLeverArm_Origin[1] + L_CdcLeverArm + L_CdcLeverArmExtended;
    CdcLeverArm_Origin[2] + H_CdcLeverArm
], [0; 0; 0]*deg)
CdcLeverArm2 := BoxF([
    CdcLeverArm2_Origin[0] + T_CdcLeverArm;
    CdcLeverArm2_Origin[1] - L_CdcLeverArm - D_CdcLeverCylinder1/2;
    CdcLeverArm2_Origin[2]
], [
    CdcLeverArm2_Origin[0];
    CdcLeverArm2_Origin[1] + (L_CdcLeverArm + L_CdcLeverArmExtended);
    CdcLeverArm2_Origin[2] + H_CdcLeverArm
], [0; 0; 0]*deg)
CdcLeverArm_Script := stack(CdcLeverLayer, CdcLeverArm1, CdcLeverArm2, CdcLeverFrz)
# Connecting Cylinder
CdcLeverConnectingCylinder1 := CylinderSUBF([
    CdcLeverArm_Origin[0] + T_CdcLeverArm;
    (CdcLeverArm_Origin[1] - L_CdcLeverArm) - D_CdcLeverCylinder1/2;
    CdcLeverArm_Origin[2] + H_LeverArm/2
], D_CdcLeverCylinder1/2, L_CdcLeverCylinder, [0; 180]*deg, ["CdcLayer"])  # Top most cylinder. Connected to float. Thickest
CdcLeverConnectingCylinder4 := CylinderSUBF([
    CdcLeverArm_Origin[0] + T_CdcLeverArm;
    CdcLeverArm_Origin[1] + L_CdcLeverArm + L_CdcLeverArmExtended - D_CdcLeverCylinder4/2;
    CdcLeverArm_Origin[2] + H_LeverArm/2
], D_CdcLeverCylinder4/2, L_CdcLeverCylinder, [0; 180]*deg, ["CdcLayer"])  # Bottom most cylinder.
CdcLeverConnectingCylinder2 := CylinderSUBF([
    CdcLeverArm_Origin[0] + T_CdcLeverArm;
    CdcLeverArm_Origin[1] + L_CdcLeverPivottoCylinder2;
    CdcLeverArm_Origin[2] + H_LeverArm/2
], D_CdcLeverCylinder2/2, L_CdcLeverCylinder, [0; 180]*deg, ["CdcLayer"])
# Cylinder closest to the pivot point
CdcLeverConnectingCylinder3 := CylinderSUBF([
    CdcLeverArm_Origin[0] + T_CdcLeverArm;
    CdcLeverArm_Origin[1] + L_CdcLeverPivottoCylinder2 + L_CdcLeverCylinder2to3;
    CdcLeverArm_Origin[2] + H_LeverArm/2
], D_CdcLeverCylinder2/2, L_CdcLeverCylinder, [0; 180]*deg, ["CdcLayer"])
CdcLeverInnerBar1 := BoxF([
    CdcLeverPivotBox_Origin[0];
    CdcLeverPivotBox_Origin[1] - W_CdcLeverPivotBox;
    CdcLeverPivotBox_Origin[2]
], [
    CdcLeverPivotBox_Origin[0] - T_CdcLeverArm;
    CdcLeverPivotBox_Origin[1] + L_CdcLeverInnerBar;
    CdcLeverPivotBox_Origin[2] - H_CdcLeverArm
], [0; 0; 0]*deg)
CdcLeverInnerBar2 := BoxF([
    CdcLeverPivotBox_Origin[0] + L_CdcLeverPivotBox;
    CdcLeverPivotBox_Origin[1] - W_CdcLeverPivotBox;
    CdcLeverPivotBox_Origin[2]
], [
    CdcLeverPivotBox_Origin[0] + L_CdcLeverPivotBox + T_CdcLeverArm;
    CdcLeverPivotBox_Origin[1] + L_CdcLeverInnerBar;
    CdcLeverPivotBox_Origin[2] - H_CdcLeverArm
], [0; 0; 0]*deg)
CdcLeverConnectingCylinder_Script := stack(SelectCdcLever, CdcLeverConnectingCylinder1, CdcLeverInnerBar1, CdcLeverInnerBar2, CdcLeverConnectingCylinder2, CdcLeverConnectingCylinder3, CdcLeverConnectingCylinder4, CdcLeverFrz)
# Mounting Plate and Pivot Box
CdcLeverPivotBox := BoxF(CdcLeverPivotBox_Origin, [
    CdcLeverPivotBox_Origin[0] + L_CdcLeverPivotBox;
    CdcLeverPivotBox_Origin[1] - W_CdcLeverPivotBox;
    CdcLeverPivotBox_Origin[2] - H_CdcLeverPivotBox
], [0; 0; 0]*deg)
CdcLeverMountingPlate := BoxF(CdcLeverPivotBox_Origin, [
    CdcLeverPivotBox_Origin[0] + H_CdcLeverMountingPlate;
    CdcLeverPivotBox_Origin[1] + W_CdcLeverMountingPlate;
    CdcLeverPivotBox_Origin[2] - L_CdcLeverMountingPlate
], [0; 0; 0]*deg)
CdcLeverMounting := stack(CdcLeverMountingLayer, CdcLeverPivotBox, CdcLeverMountingPlate, CdcLeverMountingFrz)
# Float Cable
L_CdcFloatCable := (CdcLeverArm_Origin[2] - CdcFloat_Origin[2]) - T_EtFloat + L_CdcLeverVert + H_CdcLeverArm/2 = 0.2977 m
CdcFloatCable := CylinderF([CdcFloat_Origin[0]; CdcFloat_Origin[1]; CdcFloat_Origin[2] + T_EtFloat], D_CdcFloatCable, -L_CdcFloatCable, [0; -90]*deg)
CdcLeverFloatCable_Script := stack(SelectCdcLever, CdcFloatCable, CdcLeverFrz)
# Lever Drop Tubes/Tees
# Drop Tube Tees
CdcDropTubeTee := TeeF(CdcLeverDropTubeTee_Origin, [90; 0; 90 + AN_CdcLever]*deg, ND_DropTube, SDR_13.5)
CdcDropTube2Tee := TeeF(CdcLeverDropTube2Tee_Origin, [-90; 0; 90 + AN_CdcLever]*deg, ND_DropTube, SDR_13.5)
CdcLeverFittings_Script := stack(CdcLeverFittingsLayer, CdcDropTubeTee, CdcDropTube2Tee, CdcLeverFittingsFrz)
# DropPlumbing
CdcLeverDropTube1 := PipeF(CdcLeverDropTube_Origin, L_DropTube, [-AN_CdcLever; -90]*deg, ND_DropTube, SDR_13.5)
CdcLeverDropTube2 := PipeF(CdcLeverDropTube2_Origin, L_DropTube, [-AN_CdcLever; -90]*deg, ND_DropTube, SDR_13.5)
CdcLeverPlu_Script := stack(CdcLeverPluLayer, CdcLeverDropTube1, CdcLeverDropTube2, CdcLeverPluFrz)
# Lever Sliders
CdcLeverSliderOutsideBox := BoxF(CdcLeverSlider1_Origin, [
    CdcLeverSlider1_Origin[0] + T_CdcLeverSlider;
    CdcLeverSlider1_Origin[1] + L_CdcLeverSlider;
    CdcLeverSlider1_Origin[2] - H_CdcLeverSlider
], [0; 0; 0]*deg)
CdcLeverSliderOutside2Box := BoxF(CdcLeverSlider2_Origin, [
    CdcLeverSlider2_Origin[0] - T_CdcLeverSlider;
    CdcLeverSlider2_Origin[1] + L_CdcLeverSlider;
    CdcLeverSlider2_Origin[2] - H_CdcLeverSlider
], [0; 0; 0]*deg)
CdcLeverSliderMiddleTop2Box := BoxF(CdcLeverSliderMiddleTop2_Origin, [
    CdcLeverSliderMiddleTop2_Origin[0] - T_CdcLeverArm;
    CdcLeverSliderMiddleTop2_Origin[1] + L_CdcLeverSlider;
    CdcLeverSliderMiddleTop2_Origin[2] - T_CdcLeverSlider
], [0; 0; 0]*deg)
CdcLeverSliderMiddleTopBox := BoxF(CdcLeverSliderMiddleTop_Origin, [
    CdcLeverSliderMiddleTop_Origin[0] + T_CdcLeverArm;
    CdcLeverSliderMiddleTop_Origin[1] + L_CdcLeverSlider;
    CdcLeverSliderMiddleTop_Origin[2] - T_CdcLeverSlider
], [0; 0; 0]*deg)
CdcLeverSliderMiddleBot2Box := BoxF(CdcLeverSliderMiddleBot2_Origin, [
    CdcLeverSliderMiddleBot2_Origin[0] - T_CdcLeverArm;
    CdcLeverSliderMiddleBot2_Origin[1] + L_CdcLeverSlider;
    CdcLeverSliderMiddleBot2_Origin[2] - T_CdcLeverSlider
], [0; 0; 0]*deg)
CdcLeverSliderMiddleBotBox := BoxF(CdcLeverSliderMiddleBot_Origin, [
    CdcLeverSliderMiddleBot_Origin[0] + T_CdcLeverArm;
    CdcLeverSliderMiddleBot_Origin[1] + L_CdcLeverSlider;
    CdcLeverSliderMiddleBot_Origin[2] - T_CdcLeverSlider
], [0; 0; 0]*deg)
CdcLeverSliderInnerTop2Box := BoxF(CdcLeverSliderInnerTop2_Origin, [
    CdcLeverSliderInnerTop2_Origin[0] - T_CdcLeverSlider;
    CdcLeverSliderInnerTop2_Origin[1] + L_CdcLeverSlider;
    CdcLeverSliderInnerTop2_Origin[2] - 2*T_CdcLeverSlider
], [0; 0; 0]*deg)
CdcLeverSliderInnerTopBox := BoxF(CdcLeverSliderInnerTop_Origin, [
    CdcLeverSliderInnerTop_Origin[0] + T_CdcLeverSlider;
    CdcLeverSliderInnerTop_Origin[1] + L_CdcLeverSlider;
    CdcLeverSliderInnerTop_Origin[2] - 2*T_CdcLeverSlider
], [0; 0; 0]*deg)
CdcLeverSliderInnerBotBox := BoxF(CdcLeverSliderInnerBot_Origin, [
    CdcLeverSliderInnerBot_Origin[0] + T_CdcLeverSlider;
    CdcLeverSliderInnerBot_Origin[1] + L_CdcLeverSlider;
    CdcLeverSliderInnerBot_Origin[2] - 2*T_CdcLeverSlider
], [0; 0; 0]*deg)
CdcLeverSliderInnerBot2Box := BoxF(CdcLeverSliderInnerBot2_Origin, [
    CdcLeverSliderInnerBot2_Origin[0] - T_CdcLeverSlider;
    CdcLeverSliderInnerBot2_Origin[1] + L_CdcLeverSlider;
    CdcLeverSliderInnerBot2_Origin[2] - 2*T_CdcLeverSlider
], [0; 0; 0]*deg)
CdcLeverSlider_Script := stack(CdcLeverSliderLayer, CdcLeverSliderOutsideBox, CdcLeverSliderOutside2Box, CdcLeverSliderMiddleTopBox, CdcLeverSliderMiddleTop2Box, CdcLeverSliderMiddleBotBox, CdcLeverSliderMiddleBot2Box, CdcLeverSliderInnerTopBox, CdcLeverSliderInnerTop2Box, CdcLeverSliderInnerBotBox, CdcLeverSliderInnerBot2Box, Union_All, CdcLeverSliderFrz)
# Float
CdcFloat := CylinderF(CdcFloat_Origin, OR_Fitting(ND_EtFloat), T_CdcFloat, [0; 90]*deg)
CdcFloat_Script := stack(CdcFloatLayer, CdcFloat, CdcFloatFrz)
# Lever Rotation
Rotate3D_CdcLever := Rotate3DLast([CdcLeverArm_Origin[1]; CdcLeverArm_Origin[2]; CdcLeverArm_Origin[0]], "z", -AN_CdcLever*deg)
RotateCdcLever_Script := stack(ThawCdcLever, view("r"), Rotate3D_CdcLever, view("t"), CdcLeverFrz)
RotateCdcLeverSlider_Script := stack(ThawCdcLeverSlider, view("r"), Rotate3D_CdcLever, view("t"), CdcLeverSliderFrz)
RotateCdcLeverFittings_Script := stack(ThawCdcLeverFittings, view("r"), Rotate3D_CdcLever, view("t"), CdcLeverFittingsFrz)
RotateCdcLeverPlu_Script := stack(ThawCdcLeverPlu, view("r"), Rotate3D_CdcLever, view("t"), CdcLeverPluFrz)
CdcLever_Script := stack(CdcFloat_Script, CdcLeverArm_Script, CdcLeverConnectingCylinder_Script, RotateCdcLever_Script, CdcLeverSlider_Script, RotateCdcLeverSlider_Script, CdcLeverFittings_Script, RotateCdcLeverFittings_Script, CdcLeverPlu_Script, RotateCdcLeverPlu_Script, CdcLeverFloatCable_Script, CdcLeverMounting)
CdcLever_ScriptNoRotation := stack(CdcFloat_Script, CdcLeverArm_Script, CdcLeverConnectingCylinder_Script, CdcLeverSlider_Script, CdcLeverFittings_Script, CdcLeverPlu_Script)
# [component: inputs CdcLever_Script]
LeverandET_Script := stack(AC_EntranceTank, CdcLever_Script)
# [component: inputs LeverandET_Script]
# Manifold
# Manifold Pipes
# Coagulant Connector and Delivery Pipes
CoagConnectorPipe := PipeF(CoagDosingTube_Origin + [
    -L_PVCBallValve - ShortTeeLength(ND_DeliveryPipe) - SocketDepth(ND_DeliveryPipe);
    0 m;
    .5*TeeLength(ND_DeliveryPipe)
], 2*SocketDepth(ND_DeliveryPipe), [0; 90]*deg, ND_DeliveryPipe, SDR_13.5)
ArrayCoagConnectorPipe := ArrayLast(N_CoagTubes, 1, B_DosingTubes)
MirrorCoagConnectorPipe := Mirror3dAll("yz", [
    CoagDosingTube_Origin[0] + .5*L_CoagTube;
    CoagDosingTube_Origin[1];
    CoagDosingTube_Origin[2] + 1/4*H_Et + ShortTeeLength(ND_DeliveryPipe) + .5*ND_DeliveryPipe
], "n")
CoagDeliveryPipe := PipeF(CoagDeliveryPipe_Origin, L_CoagDeliveryPipe, [0; 0]*deg, ND_DeliveryPipe, SDR_13.5)
CoagDeliveryConnectorPipeLong := PipeF(CoagDosingTube_Origin + [
    L_PVCBallValve + ShortTeeLength(ND_DeliveryPipe) + SocketDepth(ND_DeliveryPipe) + L_CoagTube;
    0 m;
    -.5*TeeLength(ND_DeliveryPipe)
], L_CoagDeliveryConnectorPipeLong, [0; -90]*deg, ND_DeliveryPipe, SDR_13.5)
CoagAirReleaseConnectorBottomRightPipe := PipeF(CoagDosingTube_Origin + [
    -L_PVCBallValve - ShortTeeLength(ND_DeliveryPipe) - SocketDepth(ND_DeliveryPipe);
    (ElbowRadius(ND_DeliveryPipe)*(sin(45 deg)/sin(67.5 deg)))*cos(67.5 deg) + 2*(SocketDepth(ND_DeliveryPipe)*cos(45 deg));
    ((N_CoagTubes - 1)*(TeeLength(ND_DeliveryPipe) + 2*SocketDepth(ND_DeliveryPipe)) + .5*TeeLength(ND_DeliveryPipe) + 2*SocketDepth(ND_DeliveryPipe)) + (ElbowRadius(ND_DeliveryPipe)*(sin(45 deg)/sin(67.5 deg)))*sin(67.5 deg) + 2*(SocketDepth(ND_DeliveryPipe)*cos(45 deg))
], 2*SocketDepth(ND_DeliveryPipe), [45; -90]*deg, ND_DeliveryPipe, SDR_13.5)
CoagAirReleaseConnectorBottomLeftPipe := PipeF(CoagDosingTube_Origin + [
    L_CoagTube + L_PVCBallValve + ShortTeeLength(ND_DeliveryPipe) + SocketDepth(ND_DeliveryPipe);
    (ElbowRadius(ND_DeliveryPipe)*(sin(45 deg)/sin(67.5 deg)))*cos(67.5 deg) + 2*(SocketDepth(ND_DeliveryPipe)*cos(45 deg));
    ((N_CoagTubes - 1)*(TeeLength(ND_DeliveryPipe) + 2*SocketDepth(ND_DeliveryPipe)) + .5*TeeLength(ND_DeliveryPipe) + 2*SocketDepth(ND_DeliveryPipe)) + (ElbowRadius(ND_DeliveryPipe)*(sin(45 deg)/sin(67.5 deg)))*sin(67.5 deg) + 2*(SocketDepth(ND_DeliveryPipe)*cos(45 deg))
], 2*SocketDepth(ND_DeliveryPipe), [45; -90]*deg, ND_DeliveryPipe, SDR_13.5)
L_CoagAirReleaseConnectorMiddleRightPipe := (N_ChlorTubes - 1)*(2*SocketDepth(ND_DeliveryPipe) + TeeLength(ND_DeliveryPipe)) + TeeLength(ND_DeliveryPipe)
CoagAirReleaseConnectorMiddleRightPipe := PipeF(CoagDosingTube_Origin + [
    -L_PVCBallValve - ShortTeeLength(ND_DeliveryPipe) - SocketDepth(ND_DeliveryPipe);
    2*(ElbowRadius(ND_DeliveryPipe)*(sin(45 deg)/sin(67.5 deg)))*cos(67.5 deg) + 2*(SocketDepth(ND_DeliveryPipe)*cos(45 deg));
    ((N_CoagTubes - 1)*(TeeLength(ND_DeliveryPipe) + 2*SocketDepth(ND_DeliveryPipe)) + .5*TeeLength(ND_DeliveryPipe) + 2*SocketDepth(ND_DeliveryPipe)) + 2*(ElbowRadius(ND_DeliveryPipe)*(sin(45 deg)/sin(67.5 deg)))*sin(67.5 deg) + 2*(SocketDepth(ND_DeliveryPipe)*cos(45 deg))
], L_CoagAirReleaseConnectorMiddleRightPipe, [0; 90]*deg, ND_DeliveryPipe, SDR_13.5)
CoagAirReleaseConnectorMiddleLeftPipe := PipeF(CoagDosingTube_Origin + [
    L_CoagTube + L_PVCBallValve + ShortTeeLength(ND_DeliveryPipe) + SocketDepth(ND_DeliveryPipe);
    2*(ElbowRadius(ND_DeliveryPipe)*(sin(45 deg)/sin(67.5 deg)))*cos(67.5 deg) + 2*(SocketDepth(ND_DeliveryPipe)*cos(45 deg));
    ((N_CoagTubes - 1)*(TeeLength(ND_DeliveryPipe) + 2*SocketDepth(ND_DeliveryPipe)) + .5*TeeLength(ND_DeliveryPipe) + 2*SocketDepth(ND_DeliveryPipe)) + 2*(ElbowRadius(ND_DeliveryPipe)*(sin(45 deg)/sin(67.5 deg)))*sin(67.5 deg) + 2*(SocketDepth(ND_DeliveryPipe)*cos(45 deg))
], L_CoagAirReleaseConnectorMiddleRightPipe, [0; 90]*deg, ND_DeliveryPipe, SDR_13.5)
CoagAirReleaseConnectorTopRightPipe := PipeF(CoagDosingTube_Origin + [
    -L_PVCBallValve - ShortTeeLength(ND_DeliveryPipe) - SocketDepth(ND_DeliveryPipe);
    (ElbowRadius(ND_DeliveryPipe)*(sin(45 deg)/sin(67.5 deg)))*cos(67.5 deg) + 2*(SocketDepth(ND_DeliveryPipe)*cos(45 deg));
    ((N_CoagTubes - 1)*(TeeLength(ND_DeliveryPipe) + 2*SocketDepth(ND_DeliveryPipe)) + .5*TeeLength(ND_DeliveryPipe) + 2*SocketDepth(ND_DeliveryPipe)) + 3*(ElbowRadius(ND_DeliveryPipe)*(sin(45 deg)/sin(67.5 deg)))*sin(67.5 deg) + 2*(SocketDepth(ND_DeliveryPipe)*cos(45 deg)) + L_CoagAirReleaseConnectorMiddleRightPipe
], 2*SocketDepth(ND_DeliveryPipe), [45; 90]*deg, ND_DeliveryPipe, SDR_13.5)
CoagAirReleaseConnectorTopLeftPipe := PipeF(CoagDosingTube_Origin + [
    L_CoagTube + L_PVCBallValve + ShortTeeLength(ND_DeliveryPipe) + SocketDepth(ND_DeliveryPipe);
    (ElbowRadius(ND_DeliveryPipe)*(sin(45 deg)/sin(67.5 deg)))*cos(67.5 deg) + 2*(SocketDepth(ND_DeliveryPipe)*cos(45 deg));
    ((N_CoagTubes - 1)*(TeeLength(ND_DeliveryPipe) + 2*SocketDepth(ND_DeliveryPipe)) + .5*TeeLength(ND_DeliveryPipe) + 2*SocketDepth(ND_DeliveryPipe)) + 3*(ElbowRadius(ND_DeliveryPipe)*(sin(45 deg)/sin(67.5 deg)))*sin(67.5 deg) + 2*(SocketDepth(ND_DeliveryPipe)*cos(45 deg)) + L_CoagAirReleaseConnectorMiddleRightPipe
], 2*SocketDepth(ND_DeliveryPipe), [45; 90]*deg, ND_DeliveryPipe, SDR_13.5)
CoagAirReleaseRightPipe := PipeF(CoagDosingTube_Origin + [
    -L_PVCBallValve - ShortTeeLength(ND_DeliveryPipe) - SocketDepth(ND_DeliveryPipe);
    0 m;
    ((N_CoagTubes - 1)*(TeeLength(ND_DeliveryPipe) + 2*SocketDepth(ND_DeliveryPipe)) + .5*TeeLength(ND_DeliveryPipe) + 2*SocketDepth(ND_DeliveryPipe)) + 4*(ElbowRadius(ND_DeliveryPipe)*(sin(45 deg)/sin(67.5 deg)))*sin(67.5 deg) + 4*(SocketDepth(ND_DeliveryPipe)*cos(45 deg)) + L_CoagAirReleaseConnectorMiddleRightPipe
], L_ChlorAirReleasePipe - ((ElbowRadius(ND_DeliveryPipe)*(sin(45 deg)/sin(67.5 deg)))*sin(67.5 deg) + 2*(SocketDepth(ND_DeliveryPipe)*cos(45 deg))), [0; 90]*deg, ND_DeliveryPipe, SDR_13.5)
CoagAirReleaseLeftPipe := PipeF(CoagDosingTube_Origin + [
    L_CoagTube + L_PVCBallValve + ShortTeeLength(ND_DeliveryPipe) + SocketDepth(ND_DeliveryPipe);
    0 m;
    ((N_CoagTubes - 1)*(TeeLength(ND_DeliveryPipe) + 2*SocketDepth(ND_DeliveryPipe)) + .5*TeeLength(ND_DeliveryPipe) + 2*SocketDepth(ND_DeliveryPipe)) + 4*(ElbowRadius(ND_DeliveryPipe)*(sin(45 deg)/sin(67.5 deg)))*sin(67.5 deg) + 4*(SocketDepth(ND_DeliveryPipe)*cos(45 deg)) + L_CoagAirReleaseConnectorMiddleRightPipe
], L_ChlorAirReleasePipe - ((ElbowRadius(ND_DeliveryPipe)*(sin(45 deg)/sin(67.5 deg)))*sin(67.5 deg) + 2*(SocketDepth(ND_DeliveryPipe)*cos(45 deg))), [0; 90]*deg, ND_DeliveryPipe, SDR_13.5)
# Chlorine Connector and Delivery Pipes
# connects tees closest to the
# ET
ChlorConnectorPipe := PipeF(ChlorDosingTube_Origin + [
    -L_PVCBallValve - ShortTeeLength(ND_DeliveryPipe) - SocketDepth(ND_DeliveryPipe);
    0 m;
    .5*TeeLength(ND_DeliveryPipe)
], 2*SocketDepth(ND_DeliveryPipe), [0; 90]*deg, ND_DeliveryPipe, SDR_13.5)
ArrayChlorConnectorPipe := ArrayLast(N_ChlorTubes - 1, 1, B_DosingTubes)
MirrorChlorConnectorPipe := Mirror3dAll("yz", [
    ChlorDosingTube_Origin[0] + .5*L_ChlorTube;
    ChlorDosingTube_Origin[1];
    ChlorDosingTube_Origin[2] + 1/4*H_Et + ShortTeeLength(ND_DeliveryPipe) + .5*ND_DeliveryPipe
], "n")
L_ChlorDeliveryConnectorPipeLong :=
    2*SocketDepth(ND_DeliveryPipe) if N_CoagTubes + N_ChlorTubes ≤ N_TubesTriggerStack
    ChlorDosingTube_Origin[2] - ChlorDeliveryPipe_Origin[2] - .5*TeeLength(ND_DeliveryPipe) - ElbowRadius(ND_DeliveryPipe) if L_ChlorDeliveryPipe > L_CoagDeliveryPipe + 2*(ElbowRadius(ND_DeliveryPipe) + SocketDepth(ND_DeliveryPipe))
    max(ChlorDosingTube_Origin[2] - ChlorDeliveryPipe_Origin[2] - .5*TeeLength(ND_DeliveryPipe) - ElbowRadius(ND_DeliveryPipe) - (2*sin(45 deg)*(2*ElbowRadius(ND_DeliveryPipe) + 2*SocketDepth(ND_DeliveryPipe)) + (N_ChlorTubes + 1)*B_DosingTubes + sin(45 deg)*(1 - tan(22.5 deg))*ElbowRadius(ND_DeliveryPipe) + SocketDepth(ND_DeliveryPipe)), 2*SocketDepth(ND_DeliveryPipe)) otherwise
    = 0.340754 m
ChlorDeliveryConnectorPipeLong := PipeF(ChlorDosingTube_Origin + [
    L_PVCBallValve + ShortTeeLength(ND_DeliveryPipe) + SocketDepth(ND_DeliveryPipe) + L_ChlorTube;
    0 m;
    -.5*TeeLength(ND_DeliveryPipe)
], -L_ChlorDeliveryConnectorPipeLong, [0; 90]*deg, ND_DeliveryPipe, SDR_13.5)
ChlorDosingTube_Origin + [
    L_PVCBallValve + ShortTeeLength(ND_DeliveryPipe) + SocketDepth(ND_DeliveryPipe) + L_ChlorTube;
    0 m;
    -.5*TeeLength(ND_DeliveryPipe) - L_ChlorDeliveryConnectorPipeLong
] = [-0.84135; 4.99119; 1.43522] m
ChlorElbowConnectorPipeBottom := PipeF(ChlorDeliveryPipe_Origin + [
    -ElbowRadius(ND_DeliveryPipe) + (L_PVCBallValve + ShortTeeLength(ND_DeliveryPipe) + SocketDepth(ND_DeliveryPipe) + L_ChlorTube + L_PVCBallValve);
    -sin(45 deg)*ElbowRadius(ND_DeliveryPipe);
    sin(45 deg)*ElbowRadius(ND_DeliveryPipe)
], 2*SocketDepth(ND_DeliveryPipe), [45; -90]*deg, ND_DeliveryPipe, SDR_13.5)
L_ChlorBridgeConnectorPipe := ChlorDosingTube_Origin[2] - ChlorDeliveryPipe_Origin[2] - .5*TeeLength(ND_DeliveryPipe) - L_ChlorTube - sin(45 deg)*(4*ElbowRadius(ND_DeliveryPipe) + 4*SocketDepth(ND_DeliveryPipe) + (1 - tan(22.5 deg))*ElbowRadius(ND_DeliveryPipe))
ChlorBridgeConnectorPipe := PipeF(ChlorDeliveryPipe_Origin + [
    ElbowRadius(ND_DeliveryPipe);
    -(sin(45 deg)*(ElbowRadius(ND_DeliveryPipe) + 2*SocketDepth(ND_DeliveryPipe)) + (1 - sin(45 deg))*ElbowRadius(ND_DeliveryPipe));
    sin(45 deg)*(ElbowRadius(ND_DeliveryPipe) + 2*SocketDepth(ND_DeliveryPipe)) + sin(45 deg)*ElbowRadius(ND_DeliveryPipe)
], L_ChlorBridgeConnectorPipe, [0; 90]*deg, ND_DeliveryPipe, SDR_13.5)
ChlorElbowConnectorPipeTop := PipeF(ChlorDosingTube_Origin + [
    -L_DosingConnectors - ShortTeeLength(ND_DeliveryPipe) - SocketDepth(ND_DeliveryPipe);
    -sin(45 deg)*(2*SocketDepth(ND_DeliveryPipe) + (1 - tan(22.5 deg))*ElbowRadius(ND_DeliveryPipe)) - (1 - sin(45 deg))*ElbowRadius(ND_DeliveryPipe);
    -.5*TeeLength(ND_DeliveryPipe) - L_ChlorTube - sin(45 deg)*(2*SocketDepth(ND_DeliveryPipe) + (1 - tan(22.5 deg))*ElbowRadius(ND_DeliveryPipe) + ElbowRadius(ND_DeliveryPipe))
], 2*SocketDepth(ND_DeliveryPipe) + (1 - tan(22.5 deg))*ElbowRadius(ND_DeliveryPipe), [-45; 90]*deg, ND_DeliveryPipe, SDR_13.5)
ChlorDeliveryPipe := PipeF(ChlorDeliveryPipe_Origin, L_ChlorDeliveryPipe, [0; 0]*deg, ND_DeliveryPipe, SDR_13.5)
ChlorAirReleaseRightPipe := PipeF(ChlorDosingTube_Origin + [
    -L_PVCBallValve - ShortTeeLength(ND_DeliveryPipe) - SocketDepth(ND_DeliveryPipe);
    0 m;
    (N_ChlorTubes - 1)*(TeeLength(ND_DeliveryPipe) + 2*SocketDepth(ND_DeliveryPipe)) + .5*TeeLength(ND_DeliveryPipe)
], L_ChlorAirReleasePipe, [0; 90]*deg, ND_DeliveryPipe, SDR_13.5)
ChlorAirReleaseLeftPipe := PipeF(ChlorDosingTube_Origin + [
    L_ChlorTube + L_PVCBallValve + ShortTeeLength(ND_DeliveryPipe) + SocketDepth(ND_DeliveryPipe);
    0 m;
    (N_ChlorTubes - 1)*(TeeLength(ND_DeliveryPipe) + 2*SocketDepth(ND_DeliveryPipe)) + .5*TeeLength(ND_DeliveryPipe)
], L_ChlorAirReleasePipe, [0; 90]*deg, ND_DeliveryPipe, SDR_13.5)
# Manifold Fittings
# Coag and Chlor Elbows
ElbowCoagDosing, ElbowCoagDosingBottomLeft, ElbowChlorDosingBottomLeft
ElbowCoagCHT := ElbowF(CoagDeliveryPipe_Origin + [-L_CoagDeliveryPipe; 0 m; 0 m], [90; 0; 90]*deg, ND_DeliveryPipe, SDR_13.5)
ElbowChlorCHT := ElbowF(ChlorDeliveryPipe_Origin + [-L_ChlorDeliveryPipe; 0 m; 0 m], [90; 0; 90]*deg, ND_DeliveryPipe, SDR_13.5)
ElbowCoagDeliveryLeft := ElbowF(CoagDeliveryPipe_Origin, [-90; 0; 90]*deg, ND_DeliveryPipe, SDR_13.5)
ElbowChlorDeliveryLeft := ElbowF(ChlorDeliveryPipe_Origin, [-90; 0; 90]*deg, ND_DeliveryPipe, SDR_13.5)
ElbowCoagDeliveryCutOut := ElbowF(CoagDeliveryPipe_Origin - [L_CoagDeliveryPipe; 0 m; 0 m], [0; 0; 0], ND_DeliveryPipe, SDR_13.5)
2*sin(45 deg)*SocketDepth(ND_DeliveryPipe) = 0.0240416 m
ElbowChlorDeliveryCutOut := ElbowF(ChlorDeliveryPipe_Origin - [L_ChlorDeliveryPipe; 0 m; 0 m], [90; 0; 90], ND_DeliveryPipe, SDR_13.5)
[-135; 90; 0]
# Option 1:Eliminate the top right elbow and modify the tee code and add a ball valve on top
# option 2: repla90 the top right elbow with a tee and ball valve without changing the tee code
# Coag 45 deg Elbows
Elbow45CoagDosingBottomRight := Elbow45F(CoagDosingTube_Origin + [
    -L_PVCBallValve - ShortTeeLength(ND_DeliveryPipe) - SocketDepth(ND_DeliveryPipe);
    0 m;
    (N_CoagTubes - 1)*(TeeLength(ND_DeliveryPipe) + 2*SocketDepth(ND_DeliveryPipe)) + .5*TeeLength(ND_DeliveryPipe) + 2*SocketDepth(ND_DeliveryPipe)
], [0; -90; 90]*deg, ND_DeliveryPipe, SDR_13.5)
Elbow45CoagDosingMiddleRight := Elbow45F(CoagDosingTube_Origin + [
    -L_PVCBallValve - ShortTeeLength(ND_DeliveryPipe) - SocketDepth(ND_DeliveryPipe);
    (ElbowRadius(ND_DeliveryPipe)*(sin(45 deg)/sin(67.5 deg)))*cos(67.5 deg) + 2*(SocketDepth(ND_DeliveryPipe)*cos(45 deg));
    ((N_CoagTubes - 1)*(TeeLength(ND_DeliveryPipe) + 2*SocketDepth(ND_DeliveryPipe)) + .5*TeeLength(ND_DeliveryPipe) + 2*SocketDepth(ND_DeliveryPipe)) + (ElbowRadius(ND_DeliveryPipe)*(sin(45 deg)/sin(67.5 deg)))*sin(67.5 deg) + 2*(SocketDepth(ND_DeliveryPipe)*cos(45 deg))
], [45; 90; 0]*deg, ND_DeliveryPipe, SDR_13.5)
Elbow45CoagDosingMiddleTopRight := Elbow45F(CoagDosingTube_Origin + [
    -L_PVCBallValve - ShortTeeLength(ND_DeliveryPipe) - SocketDepth(ND_DeliveryPipe);
    2*(ElbowRadius(ND_DeliveryPipe)*(sin(45 deg)/sin(67.5 deg)))*cos(67.5 deg) + 2*(SocketDepth(ND_DeliveryPipe)*cos(45 deg));
    ((N_CoagTubes - 1)*(TeeLength(ND_DeliveryPipe) + 2*SocketDepth(ND_DeliveryPipe)) + .5*TeeLength(ND_DeliveryPipe) + 2*SocketDepth(ND_DeliveryPipe)) + 2*(ElbowRadius(ND_DeliveryPipe)*(sin(45 deg)/sin(67.5 deg)))*sin(67.5 deg) + 2*(SocketDepth(ND_DeliveryPipe)*cos(45 deg)) + L_CoagAirReleaseConnectorMiddleRightPipe
], [90; 90; 0]*deg, ND_DeliveryPipe, SDR_13.5)
Elbow45CoagDosingTopRight := Elbow45F(CoagDosingTube_Origin + [
    -L_PVCBallValve - ShortTeeLength(ND_DeliveryPipe) - SocketDepth(ND_DeliveryPipe);
    0 m;
    ((N_CoagTubes - 1)*(TeeLength(ND_DeliveryPipe) + 2*SocketDepth(ND_DeliveryPipe)) + .5*TeeLength(ND_DeliveryPipe) + 2*SocketDepth(ND_DeliveryPipe)) + 4*(ElbowRadius(ND_DeliveryPipe)*(sin(45 deg)/sin(67.5 deg)))*sin(67.5 deg) + 4*(SocketDepth(ND_DeliveryPipe)*cos(45 deg)) + L_CoagAirReleaseConnectorMiddleRightPipe
], [-90; 90; 0]*deg, ND_DeliveryPipe, SDR_13.5)
Elbow45CoagDosingBottomLeft := Elbow45F(CoagDosingTube_Origin + [
    L_CoagTube + L_PVCBallValve + ShortTeeLength(ND_DeliveryPipe) + SocketDepth(ND_DeliveryPipe);
    0 m;
    (N_CoagTubes - 1)*(TeeLength(ND_DeliveryPipe) + 2*SocketDepth(ND_DeliveryPipe)) + .5*TeeLength(ND_DeliveryPipe) + 2*SocketDepth(ND_DeliveryPipe)
], [0; -90; 90]*deg, ND_DeliveryPipe, SDR_13.5)
Elbow45CoagDosingMiddleLeft := Elbow45F(CoagDosingTube_Origin + [
    L_CoagTube + L_PVCBallValve + ShortTeeLength(ND_DeliveryPipe) + SocketDepth(ND_DeliveryPipe);
    (ElbowRadius(ND_DeliveryPipe)*(sin(45 deg)/sin(67.5 deg)))*cos(67.5 deg) + 2*(SocketDepth(ND_DeliveryPipe)*cos(45 deg));
    ((N_CoagTubes - 1)*(TeeLength(ND_DeliveryPipe) + 2*SocketDepth(ND_DeliveryPipe)) + .5*TeeLength(ND_DeliveryPipe) + 2*SocketDepth(ND_DeliveryPipe)) + (ElbowRadius(ND_DeliveryPipe)*(sin(45 deg)/sin(67.5 deg)))*sin(67.5 deg) + 2*(SocketDepth(ND_DeliveryPipe)*cos(45 deg))
], [45; 90; 0]*deg, ND_DeliveryPipe, SDR_13.5)
Elbow45CoagDosingMiddleTopLeft := Elbow45F(CoagDosingTube_Origin + [
    L_CoagTube + L_PVCBallValve + ShortTeeLength(ND_DeliveryPipe) + SocketDepth(ND_DeliveryPipe);
    2*(ElbowRadius(ND_DeliveryPipe)*(sin(45 deg)/sin(67.5 deg)))*cos(67.5 deg) + 2*(SocketDepth(ND_DeliveryPipe)*cos(45 deg));
    ((N_CoagTubes - 1)*(TeeLength(ND_DeliveryPipe) + 2*SocketDepth(ND_DeliveryPipe)) + .5*TeeLength(ND_DeliveryPipe) + 2*SocketDepth(ND_DeliveryPipe)) + 2*(ElbowRadius(ND_DeliveryPipe)*(sin(45 deg)/sin(67.5 deg)))*sin(67.5 deg) + 2*(SocketDepth(ND_DeliveryPipe)*cos(45 deg)) + L_CoagAirReleaseConnectorMiddleRightPipe
], [90; 90; 0]*deg, ND_DeliveryPipe, SDR_13.5)
Elbow45CoagDosingTopLeft := Elbow45F(CoagDosingTube_Origin + [
    L_CoagTube + L_PVCBallValve + ShortTeeLength(ND_DeliveryPipe) + SocketDepth(ND_DeliveryPipe);
    0 m;
    ((N_CoagTubes - 1)*(TeeLength(ND_DeliveryPipe) + 2*SocketDepth(ND_DeliveryPipe)) + .5*TeeLength(ND_DeliveryPipe) + 2*SocketDepth(ND_DeliveryPipe)) + 4*(ElbowRadius(ND_DeliveryPipe)*(sin(45 deg)/sin(67.5 deg)))*sin(67.5 deg) + 4*(SocketDepth(ND_DeliveryPipe)*cos(45 deg)) + L_CoagAirReleaseConnectorMiddleRightPipe
], [-90; 90; 0]*deg, ND_DeliveryPipe, SDR_13.5)
# Manifold Tees
TeeCoagDosingTopRight := TeeF(CoagDosingTube_Origin + [-L_PVCBallValve - SocketDepth(ND_DeliveryPipe); 0 m; B_DosingTubes*(N_CoagTubes - 1)], [-90; 0; -90]*deg, ND_DeliveryPipe, SDR_13.5)
TeeChlorDosingTopRight := TeeF(ChlorDosingTube_Origin + [-L_PVCBallValve - SocketDepth(ND_DeliveryPipe); 0 m; B_DosingTubes*(N_ChlorTubes - 1)], [-90; 0; -90]*deg, ND_DeliveryPipe, SDR_13.5)
CoagTees :=
    CoagTeeStack ← layer_new("CdcCoagTees", green)
    for i ∈ 0 .. max(N_CoagTubes - 1, 0)
        CoagTeeStack ← stack(CoagTeeStack, TeeF(CoagDosingTube_Origin + [-L_PVCBallValve - SocketDepth(ND_DeliveryPipe); 0 m; B_DosingTubes*i], [-90; 0; 90]*deg, ND_DeliveryPipe, SDR_13.5))
        CoagTeeStack ← stack(CoagTeeStack, TeeF(CoagDosingTube_Origin + [L_CoagTube + L_PVCBallValve + SocketDepth(ND_DeliveryPipe); 0 m; B_DosingTubes*i], [90; 0; 90]*deg, ND_DeliveryPipe, SDR_13.5))
        i ← i + 1
    return CoagTeeStack
ChlorTees :=
    ChlorTeeStack ← layer_new("CdcChlorTees", green)
    for i ∈ 0 .. max(N_ChlorTubes - 1, 0)
        ChlorTeeStack ← stack(ChlorTeeStack, TeeF(ChlorDosingTube_Origin + [-L_PVCBallValve - SocketDepth(ND_DeliveryPipe); 0 m; B_DosingTubes*i], [-90; 0; 90]*deg, ND_DeliveryPipe, SDR_13.5))
        ChlorTeeStack ← stack(ChlorTeeStack, TeeF(ChlorDosingTube_Origin + [L_ChlorTube + L_PVCBallValve + SocketDepth(ND_DeliveryPipe); 0 m; B_DosingTubes*i], [90; 0; 90]*deg, ND_DeliveryPipe, SDR_13.5))
        i ← i + 1
    return ChlorTeeStack
# Air Release Caps
ChlorAirReleaseRightCap := CapF(ChlorDosingTube_Origin + [
    -L_PVCBallValve - ShortTeeLength(ND_DeliveryPipe) - SocketDepth(ND_DeliveryPipe);
    0 m;
    (N_ChlorTubes - 1)*(TeeLength(ND_DeliveryPipe) + 2*SocketDepth(ND_DeliveryPipe)) + .5*TeeLength(ND_DeliveryPipe) + L_ChlorAirReleasePipe
], [0; -90]*deg, ND_DeliveryPipe)
ChlorAirReleaseLeftCap := CapF(ChlorDosingTube_Origin + [
    (L_ChlorTube + L_PVCBallValve) + ShortTeeLength(ND_DeliveryPipe) + SocketDepth(ND_DeliveryPipe);
    0 m;
    (N_ChlorTubes - 1)*(TeeLength(ND_DeliveryPipe) + 2*SocketDepth(ND_DeliveryPipe)) + .5*TeeLength(ND_DeliveryPipe) + L_ChlorAirReleasePipe
], [0; -90]*deg, ND_DeliveryPipe)
CoagAirReleaseRightCap := CapF(CoagDosingTube_Origin + [
    -L_PVCBallValve - ShortTeeLength(ND_DeliveryPipe) - SocketDepth(ND_DeliveryPipe);
    0 m;
    ((N_CoagTubes - 1)*(TeeLength(ND_DeliveryPipe) + 2*SocketDepth(ND_DeliveryPipe)) + .5*TeeLength(ND_DeliveryPipe) + 2*SocketDepth(ND_DeliveryPipe)) + 4*(ElbowRadius(ND_DeliveryPipe)*(sin(45 deg)/sin(67.5 deg)))*sin(67.5 deg) + 4*(SocketDepth(ND_DeliveryPipe)*cos(45 deg)) + L_CoagAirReleaseConnectorMiddleRightPipe + (L_ChlorAirReleasePipe - ((ElbowRadius(ND_DeliveryPipe)*(sin(45 deg)/sin(67.5 deg)))*sin(67.5 deg) + 2*(SocketDepth(ND_DeliveryPipe)*cos(45 deg))))
], [0; -90]*deg, ND_DeliveryPipe)
CoagAirReleaseLeftCap := CapF(CoagDosingTube_Origin + [
    L_CoagTube + L_PVCBallValve + ShortTeeLength(ND_DeliveryPipe) + SocketDepth(ND_DeliveryPipe);
    0 m;
    ((N_CoagTubes - 1)*(TeeLength(ND_DeliveryPipe) + 2*SocketDepth(ND_DeliveryPipe)) + .5*TeeLength(ND_DeliveryPipe) + 2*SocketDepth(ND_DeliveryPipe)) + 4*(ElbowRadius(ND_DeliveryPipe)*(sin(45 deg)/sin(67.5 deg)))*sin(67.5 deg) + 4*(SocketDepth(ND_DeliveryPipe)*cos(45 deg)) + L_CoagAirReleaseConnectorMiddleRightPipe + (L_ChlorAirReleasePipe - ((ElbowRadius(ND_DeliveryPipe)*(sin(45 deg)/sin(67.5 deg)))*sin(67.5 deg) + 2*(SocketDepth(ND_DeliveryPipe)*cos(45 deg))))
], [0; -90]*deg, ND_DeliveryPipe)
# Ball Valves
CdcCoagBallValve := insertdwg("https://confluence.cornell.edu/download/attachments/173604905/PvcBallValve+Scaled.dwg", CoagDosingTube_Origin + [-L_PVCBallValve; 0 m; 0 m], ND_DeliveryPipe/(2 in), ND_DeliveryPipe/(2 in), 180 deg)
RotateCdcCoagBallValve := Rotate3DLast(CoagDosingTube_Origin + [-L_PVCBallValve; 0 m; 0 m], "y", 90 deg)
ArrayCoagBallValve := ArrayLast(N_CoagTubes, 1, B_DosingTubes)
MirrorCoagValves := Mirror3dAll("yz", [
    CoagDosingTube_Origin[0] + .5*L_CoagTube;
    CoagDosingTube_Origin[1];
    CoagDosingTube_Origin[2] + 1/4*H_Et + ShortTeeLength(ND_DeliveryPipe) + .5*ND_DeliveryPipe
], "n")
CdcCoagBallValveAir := insertdwg("https://confluence.cornell.edu/download/attachments/173604905/PvcBallValve+Scaled.dwg", CoagDosingTube_Origin + [
    -L_PVCBallValve - ShortTeeLength(ND_DeliveryPipe) - SocketDepth(ND_DeliveryPipe);
    0 m;
    (N_CoagTubes + 1)*TeeLength(ND_DeliveryPipe) + ((2*N_CoagTubes + 1)*SocketDepth(ND_DeliveryPipe)) - ShortTeeLength(ND_DeliveryPipe)
], ND_DeliveryPipe/(2 in), ND_DeliveryPipe/(2 in), -90 deg)
CdcChlorineBallValve := insertdwg("https://confluence.cornell.edu/download/attachments/173604905/PvcBallValve+Scaled.dwg", ChlorDosingTube_Origin + [-L_PVCBallValve; 0 m; 0 m], ND_DeliveryPipe/(2 in), ND_DeliveryPipe/(2 in), 180 deg)
RotateCdcChlorineBallValve := Rotate3DLast(ChlorDosingTube_Origin + [-L_PVCBallValve; 0 m; 0 m], "y", 90 deg)
ArrayChlorineBallValve := ArrayLast(N_ChlorTubes, 1, B_DosingTubes)
MirrorChlorineValves := Mirror3dAll("yz", [
    ChlorDosingTube_Origin[0] + .5*L_ChlorTube;
    ChlorDeliveryPipe_Origin[1];
    ChlorDeliveryPipe_Origin[2]
], "n")
CdcChlorineBallValveAir := insertdwg("https://confluence.cornell.edu/download/attachments/173604905/PvcBallValve+Scaled.dwg", ChlorDosingTube_Origin + [
    -L_PVCBallValve - ShortTeeLength(ND_DeliveryPipe) - SocketDepth(ND_DeliveryPipe);
    0 m;
    (N_ChlorTubes + 1)*TeeLength(ND_DeliveryPipe) + ((2*N_ChlorTubes + 1)*SocketDepth(ND_DeliveryPipe)) - ShortTeeLength(ND_DeliveryPipe)
], ND_DeliveryPipe/(2 in), ND_DeliveryPipe/(2 in), -90 deg)
CdcCoagManifoldPluLongLayer, CdcCoagManifoldPluLongFrz
CoagDeliveryConnectorPipeLong
CdcManifoldCoagPipe_Script := stack(CdcCoagManifoldPluLayer, CoagConnectorPipe, view("f"), ArrayCoagConnectorPipe, MirrorCoagConnectorPipe, view("t"), CoagDeliveryConnectorPipeLong, CoagDeliveryPipe, CdcCoagManifoldPluFrz)
CdcManifoldChlorPipe_Script := stack(CdcChlorManifoldPluLayer, ChlorConnectorPipe, view("f"), ArrayChlorConnectorPipe, MirrorChlorConnectorPipe, view("t"), ChlorDeliveryConnectorPipeLong, ChlorDeliveryPipe, CdcChlorManifoldPluFrz)
CdcManifoldChlorPipe2_Script := stack(CdcChlorManifoldPluLayer, ChlorConnectorPipe, view("f"), ArrayChlorConnectorPipe, MirrorChlorConnectorPipe, view("t"), ChlorDeliveryConnectorPipeLong, ChlorElbowConnectorPipeBottom, ChlorBridgeConnectorPipe, ChlorElbowConnectorPipeTop, ChlorDeliveryConnectorPipe, ChlorineDeliveryPipe, CdcChlorManifoldPluFrz)
ElbowCoagCHT, ElbowChlorCHT  # Elbow90ChlorDosing
CdcManifoldCoagAirReleasePipe_Script := stack(SelectCdcCoagManifoldPlu, CoagAirReleaseConnectorBottomRightPipe, CoagAirReleaseConnectorBottomLeftPipe, CoagAirReleaseConnectorMiddleRightPipe, CoagAirReleaseConnectorMiddleLeftPipe, CoagAirReleaseConnectorTopRightPipe, CoagAirReleaseConnectorTopLeftPipe, CoagAirReleaseRightPipe, CoagAirReleaseLeftPipe, CdcCoagManifoldPluFrz)
CdcManifoldChlorAirReleasePipe_Script := stack(SelectCdcChlorManifoldPlu, ChlorAirReleaseRightPipe, ChlorAirReleaseLeftPipe, CdcChlorManifoldPluFrz)
CdcChlorTeesLayer
CdcManifoldFitting_Script := stack(CdcManifoldFittingsLayer, ElbowCoagCHT, ElbowChlorCHT, ElbowCoagDeliveryLeft, ElbowChlorDeliveryLeft, CoagAirReleaseRightCap, CoagAirReleaseLeftCap, ChlorAirReleaseRightCap, ChlorAirReleaseLeftCap, CdcManifoldFittingsFrz, CdcCoagTeesLayer, CoagTees, CdcCoagTeesFrz, CdcChlorTeesLayer, ChlorTees, CdcChlorTeesFrz)
CdcManifoldFittingsLayer, ElbowCoagCHT, ElbowChlorCHT, ElbowCoagDeliveryLeft, ElbowChlorDeliveryLeft, CoagAirReleaseRightCap, CoagAirReleaseLeftCap, ChlorAirReleaseRightCap, ChlorAirReleaseLeftCap, CdcManifoldFittingsFrz, CdcCoagTeesLayer, CoagTees, CdcCoagTeesFrz, CdcChlorTeesLayer, ChlorTees, CdcChlorTeesFrz
CdcManifoldFitting2_Script := stack(CdcManifoldFittingsLayer, ElbowCoagCHT, ElbowChlorCHT, ElbowCoagDosing, Elbow90ChlorDosing, Elbow45ChlorDosingBottom, Elbow45ChlorDosingMiddle, Elbow45ChlorDosingTop, TeeCoagDosingTopRight, TeeChlorDosingTopRight, ElbowCoagDosingBottomLeft, ElbowChlorDosingBottomLeft, CdcManifoldFittingsFrz, CoagTees, CdcCoagTeesFrz, ChlorTees, CdcChlorTeesFrz)
TeeCoagDosingTopRight
TeeChlorDosingTopRight
CdcCoagAirRelease45Elbow_Script := stack(SelectCdcManifoldFittings, Elbow45CoagDosingBottomRight, Elbow45CoagDosingBottomLeft, Elbow45CoagDosingMiddleRight, Elbow45CoagDosingMiddleLeft, Elbow45CoagDosingMiddleTopRight, Elbow45CoagDosingMiddleTopLeft, Elbow45CoagDosingTopRight, Elbow45CoagDosingTopLeft, CdcManifoldFittingsFrz)
CdcManifoldTees2_Script := stack(CdcCoagTeesLayer, CoagTees, CdcCoagTeesFrz, ChlorTees, CdcChlorTeesFrz)
ManifoldFitting_Script :=
    stack(ManifoldFittingsLayer, ElbowCoagCHT, ElbowChlorCHT, ElbowCoagDosing, Elbow90ChlorDosing, TeeCoagDosingTopRight, TeeChlorDosingTopRight, ElbowCoagDosingBottomLeft, ElbowChlorDosingBottomLeft, FreezeFittings, CoagTees, FreezeCoagTees, ChlorTees, FreezeChlorTees) if N_CdcCoagTubes + N_CdcChlorineTubes ≤ N_TubesTriggerStack or L_ChlorineDeliveryPipe > L_CoagDeliveryPipe + 2*(ElbowRadius(ND_DeliveryPipe) + SocketDepth(ND_DeliveryPipe))
    stack(ManifoldFittingsLayer, ElbowCoagCHT, ElbowChlorCHT, ElbowCoagDosing, Elbow90ChlorDosing, Elbow45ChlorDosingBottom, Elbow45ChlorDosingMiddle, Elbow45ChlorDosingTop, TeeCoagDosingTopRight, TeeChlorDosingTopRight, ElbowCoagDosingBottomLeft, ElbowChlorDosingBottomLeft, FreezeFittings, CoagTees, FreezeCoagTees, ChlorTees, FreezeChlorTees) otherwise
CdcCoagBallValveAir
CdcChlorineBallValveAir
CdcManifoldValve_Script := stack(CdcCoagManifoldValvesLayer, CdcCoagBallValve, RotateCdcCoagBallValve, view("f"), ArrayCoagBallValve, MirrorCoagValves, view("t"), CdcCoagManifoldValvesFrz, CdcChlorManifoldValvesLayer, CdcChlorineBallValve, RotateCdcChlorineBallValve, view("f"), ArrayChlorineBallValve, MirrorChlorineValves, view("t"), CdcChlorManifoldValvesFrz)
CdcManifold_Script := stack(CdcManifoldCoagPipe_Script, CdcManifoldChlorPipe_Script, CdcManifoldCoagAirReleasePipe_Script, CdcManifoldChlorAirReleasePipe_Script, CdcManifoldFitting_Script, CdcCoagAirRelease45Elbow_Script, CdcManifoldValve_Script)
# [component: inputs CdcManifold_Script]
# Dosing Tubes
L_CoagTube = 1.40483 m
D_CoagTubeStockToCHEst = 0.0978355 in
N_CoagTubes = 2
L_ChlorTube = 2.04018 m
D_ChlorTubeStockToCHEst = 0.13027 in
N_ChlorTubes = 3
CoagTube := PipeF(CoagDosingTube_Origin, L_CoagTube, [180; 0]*deg, D_CoagTubeStockToCHEst, PS_FlexTube)
ArrayCoagTube := ArrayLast(max(N_CoagTubes - 1, 2), 1, B_DosingTubes)
ChlorineTube := PipeF(ChlorDosingTube_Origin, L_ChlorTube, [180; 0]*deg, D_ChlorTubeStockToCHEst, PS_FlexTube)
ArrayChlorineTube := ArrayLast(max(N_ChlorTubes, 2), 1, B_DosingTubes)
CoagDosingPipe := PipeF(CoagDosingTube_Origin + [
    -L_PVCBallValve - SocketDepth(ND_DeliveryPipe) - ShortTeeLength(ND_DeliveryPipe);
    0 m;
    -0.5*TeeLength(ND_DeliveryPipe) - SocketDepth(ND_DeliveryPipe)
], 3*SocketDepth(ND_DeliveryPipe), [0; -90]*deg, ND_DeliveryPipe, SDR_13.5)
ChlorDosingPipe := PipeF(ChlorDosingTube_Origin + [
    -L_PVCBallValve - SocketDepth(ND_DeliveryPipe) - ShortTeeLength(ND_DeliveryPipe);
    0 m;
    -0.5*TeeLength(ND_DeliveryPipe) - SocketDepth(ND_DeliveryPipe)
], 3*SocketDepth(ND_DeliveryPipe), [0; -90]*deg, ND_DeliveryPipe, SDR_13.5)
Dosing_Script := stack(CdcDosingTubesLayer, CoagTube, view("f"), ArrayCoagTube, view("t"), ChlorineTube, view("f"), ArrayChlorineTube, view("t"), CoagDosingPipe, ChlorDosingPipe, CdcDosingTubesFrz)
CdcManifoldDosing_Script := stack(CdcManifold_Script, Dosing_Script)
# [component: inputs CdcManifoldDosing_Script]
# Calibration Column Definitions | st587 has not touched this
SF_CalCol := 1.25
Ti_Res := 1.25*min
H_CalCol := 30 cm
Q_CoagCalColMax := SF_CalCol*Q_CoagMax
Vol_CoagCalCol := Ti_Res*Q_CoagCalColMax
D_inCoagCCMin := sqrt(4*Vol_CoagCalCol/(π*H_CalCol)) = 1.21661 in
ND_CoagCalCol := ND(D_inCoagCCMin, Sch40)
D_inCoagCalCol := ID(ND_CoagCalCol, Sch40) = 0.269 in
Q_ChlorCalColMax := SF_CalCol*Q_ChlorMax
Vol_ChlorCalCol := Ti_Res*Q_ChlorCalColMax
D_inChlorCCMin := sqrt(4*Vol_ChlorCalCol/(π*H_CalCol)) = 1.68249 in
ND_ChlorCalCol := ND(D_inChlorCCMin, Sch40)
D_inChlorCalCol := ID(ND_ChlorCalCol, Sch40) = 0.269 in
Q_FCCalColMax := SF_CalCol*Q_CoagMax
Vol_FCCalCol := Ti_Res*Q_FCCalColMax
D_inFCCCMin := sqrt(4*Vol_FCCalCol/(π*H_CalCol)) = 1.21661 in
ND_FCCalCol := ND(D_inFCCCMin, Sch40)
D_inFCCalCol := ID(ND_FCCalCol, Sch40) = 0.269 in
R_Cylinder := .5 cm
# st587 has not touched this
# Calibration Column Origin Points
# Z_CoagulantOutlet | was set equal to Z.FloatTop
CoagCalCol_Origin := [
    ChemPlatform_Origin[0] + ChemPlatform_Dimensions[0] + T_PlantWall + OR_Fitting(ND_CoagCalCol);
    CHT2_Origin[1] - 2*OR_Fitting(ND_CoagCalCol) - 1/2*D_CHT - 2*zc;
    Z_FloatTop
]
CoagTopCap_Origin := [CoagCalCol_Origin[0]; CoagCalCol_Origin[1]; CoagCalCol_Origin[2] + H_CalCol]
ChlorCalCol_Origin := [
    CoagCalCol_Origin[0] - OR_Fitting(ND_CoagCalCol) + OR_Fitting(ND_ChlorCalCol);
    CoagCalCol_Origin[1] - 2*zc - 2*OR_Fitting(ND_CoagCalCol) - OR_Fitting(ND_ChlorCalCol);
    Z_FloatTop
]
ChlorTopCap_Origin := [ChlorCalCol_Origin[0]; ChlorCalCol_Origin[1]; ChlorCalCol_Origin[2] + H_CalCol]
# To draw the hole in the top cap, we are subtracting a cylinder from the top cap layer
CoagCylinder_Origin := [CoagCalCol_Origin[0]; CoagCalCol_Origin[1]; CoagCalCol_Origin[2] + H_CalCol/2]
ChlorCylinder_Origin := [ChlorCalCol_Origin[0]; ChlorCalCol_Origin[1]; ChlorCalCol_Origin[2] + H_CalCol/2]
# Calibration Column and Constant Head Tanks | st587 has not touched this
MakeCalColLayer := layer_new("CdcCalColumnPlu", ltpurple)
MainCoagCalCol := PipeF(CoagCalCol_Origin, H_CalCol, [0; 90]*deg, ND_CoagCalCol, Sch40)
MainChlorCalCol := PipeF(ChlorCalCol_Origin, H_CalCol, [0; 90]*deg, ND_ChlorCalCol, Sch40)
CHT1 := ConstantHeadTankF(CHT_Origin, [90; 0; 90]*deg, D_CHT/2, H_CHT, T_CHTwall, .75*H_CHT, 1/3*in, 1/3*in, 1/3*in, 1/3*in)
CHT2 := ConstantHeadTankF(CHT2_Origin, [90; 0; 90]*deg, D_CHT/2, H_CHT, T_CHTwall, .75*H_CHT, 1/3*in, 1/3*in, 1/3*in, 1/3*in)
CHT3 := ConstantHeadTankF(CHT3_Origin, [90; 0; 90]*deg, D_CHT/2, H_CHT, T_CHTwall, .75*H_CHT, 1/3*in, 1/3*in, 1/3*in, 1/3*in)
CHT4 := ConstantHeadTankF(CHT4_Origin, [90; 0; 90]*deg, D_CHT/2, H_CHT, T_CHTwall, .75*H_CHT, 1/3*in, 1/3*in, 1/3*in, 1/3*in)
FreezeCalCol := FreezeLayer("CdcCalColumnPlu")
MakeCapsLayer := layer_new("CdcColumnCapsPlu", blue2)
CoagTopCap := CapF(CoagTopCap_Origin, [0; -90]*deg, ND_CoagCalCol)
CoagBottomCap := CapF(CoagTopCap_Origin - [0 m; 0 m; H_CalCol], [0; 90]*deg, ND_CoagCalCol)
ChlorTopCap := CapF(ChlorTopCap_Origin, [0; -90]*deg, ND_ChlorCalCol)
ChlorBottomCap := CapF(ChlorTopCap_Origin - [0 m; 0 m; H_CalCol], [0; 90]*deg, ND_ChlorCalCol)
FreezeCapsLayer := FreezeLayer("CdcColumnCapsPlu")
DrawCoagCylinder := CylinderF(CoagCylinder_Origin, R_Cylinder, H_CalCol, [0; 90]*deg)
DrawChlorCylinder := CylinderF(ChlorCylinder_Origin, R_Cylinder, H_CalCol, [0; 90]*deg)
LayCylinder := GroupAll("DeleteMe")
MakeHole := SubtractF(["CdcColumnCapsPlu"], "DeleteMe")
CdcCalColumn2_Script := stack(MakeCalColLayer, MainCoagCalCol, MainChlorCalCol, CHT1, CHT2, CHT3, CHT4, FreezeCalCol, MakeCapsLayer, CoagTopCap, CoagBottomCap, ChlorTopCap, ChlorBottomCap, FreezeCapsLayer, DrawCoagCylinder, DrawChlorCylinder, LayCylinder, MakeHole)
CdcCalColumn1_Script := stack(MakeCalColLayer, MainChlorCalCol, CHT1, FreezeCalCol, MakeCapsLayer, ChlorTopCap, ChlorBottomCap, FreezeCapsLayer, DrawChlorCylinder, CHT2, LayCylinder, MakeHole)
AC_Cdc2 := stack(CdcLever_Script, Dosing_Script, Manifold_Script, CdcCalColumn2_Script)
AC_Cdc1 := stack(Cdc1_Script, Dosing_Script, Manifold_Script, CdcCalColumn1_Script)
AC_Cdc2.try := stack(CdcLever_Script, Dosing_Script, CdcManifold_Script)
AC_Cdc := AC_Cdc2.try
CdcandEt := stack(AC_EntranceTank, AC_Cdc, AC_OperatorAccess)
Cdcandet := stack(AC_EntranceTank, AC_Cdc)
AC_OperatorAccess
Drawing := stack(EtTankScript, AC_Cdc, AC_ChemTanks)  # AC_ChemTanks
AC_ChemTanks
AltDrawing := stack(EtTankScript, AC_Cdc1, AC_ChemTanks)
# [component: inputs Cdcandet]
AC_OperatorAccess
# [component: inputs CdcandEt]
# Entrance tank and cdc script
# [component: inputs AC_Cdc]
# [component: inputs Manifold_Script]
# Lever and dosers
