# [reference: SampleInputs.xmcd]
Q_Plant := 20*L/s
# [reference: EtFlocSedFi.xmcd]
ChemPlatformFloor_Origin = [-7.20251; 7.74934; 2.91812] m
CoagCCElbow1_Origin = [-7.03862; 6.10389; 2.64056] m
# Chemical Dose Controller
# Layers
# Lever Arm Layers
CdcLeverLayer := layer_new("CdcLever", ltgrey)
SelectCdcLever := SelectLayer("CdcLever")
CdcLeverFrz := FreezeLayer("CdcLever")
ThawCdcLever := ThawMultiple(["CdcLever"])
CdcLeverMountingLayer := layer_new("CdcLeverMounting", ltgrey)
SelectCdcLeverMounting := SelectLayer("CdcLeverMounting")
CdcLeverMountingFrz := FreezeLayer("CdcLeverMounting")
CdcLeverSliderLayer := layer_new("CdcLeverSlider", ltgrey)
SelectCdcSliderLever := SelectLayer("CdcLeverSlider")
CdcLeverSliderFrz := FreezeLayer("CdcLeverSlider")
ThawCdcLeverSlider := ThawMultiple(["CdcLeverSlider"])
CdcFloatLayer := layer_new("CdcFloat", red)
SelectCdcFloat := SelectLayer("CdcFloat")
CdcFloatFrz := FreezeLayer("CdcFloat")
CdcLeverFittingsLayer := layer_new("CdcLeverFittings", green)
SelectCdcLeverFittings := SelectLayer("CdcLeverFittings")
CdcLeverFittingsFrz := FreezeLayer("CdcLeverFittings")
ThawCdcLeverFittings := ThawMultiple(["CdcLeverFittings"])
CdcLeverPluLayer := layer_new("CdcLeverPlu", blue)
SelectCdcLeverPlu := SelectLayer("CdcLeverPlu")
CdcLeverPluFrz := FreezeLayer("CdcLeverPlu")
ThawCdcLeverPlu := ThawMultiple(["CdcLeverPlu"])
# Manifold Layers
CdcCoagManifoldPluLayer := layer_new("CdcCoagManifoldPlu", blue)
SelectCdcCoagManifoldPlu := SelectLayer("CdcCoagManifoldPlu")
CdcCoagManifoldPluFrz := FreezeLayer("CdcCoagManifoldPlu")
CdcChlorManifoldPluLayer := layer_new("CdcChlorManifoldPlu", blue)
SelectCdcChlorManifoldPlu := SelectLayer("CdcChlorManifoldPlu")
CdcChlorManifoldPluFrz := FreezeLayer("CdcChlorManifoldPlu")
CdcManifoldFittingsLayer := layer_new("CdcManifoldFittings", green)
SelectCdcManifoldFittings := SelectLayer("CdcManifoldFittings")
CdcManifoldFittingsFrz := FreezeLayer("CdcManifoldFittings")
CdcCoagTeesLayer := layer_new("CdcCoagTees", green)
SelectCdcCoagTees := SelectLayer("CdcCoagTees")
CdcCoagTeesFrz := FreezeLayer("CdcCoagTees")
CdcChlorTeesLayer := layer_new("CdcChlorTees", green)
SelectCdcChlorTees := SelectLayer("CdcChlorTees")
CdcChlorTeesFrz := FreezeLayer("CdcChlorTees")
CdcCoagManifoldValvesLayer := layer_new("CdcCoagManifoldValves", ltgrey)
SelectCdcCoagManifoldValves := SelectLayer("CdcCoagManifoldValves")
CdcCoagManifoldValvesFrz := FreezeLayer("CdcCoagManifoldValves")
CdcChlorManifoldValvesLayer := layer_new("CdcChlorManifoldValves", ltgrey)
SelectCdcChlorManifoldValves := SelectLayer("CdcChlorManifoldValves")
CdcChlorManifoldValvesFrz := FreezeLayer("CdcChlorManifoldValves")
CdcDosingTubesLayer := layer_new("CdcDosingPlu", red)
SelectCdcDosingTubes := SelectLayer("CdcDosingPlu")
CdcDosingTubesFrz := FreezeLayer("CdcDosingPlu")
# Constant Head Tank Layers | mrf222 Spring 2016
CdcCHTLayer := layer_new("CdcCHT", purple)
SelectCdcCHT := SelectLayer("CdcCHT")
CdcCHTFrz := FreezeLayer("CdcCHT")
ThawCdcCHT := ThawMultiple(["CdcCHT"])
CdcCalColPluLayer := layer_new("CdcCalColPlu", blue)
SelectCdcCalColPlu := SelectLayer("CdcCalColPlu")
CdcCalColPluFrz := FreezeLayer("CdcCalColPlu")
ThawCdcCalColPlu := ThawMultiple(["CdcCalColPlu"])
CdcCalColFittingsLayer := layer_new("CdcCalColFittings", green)
SelectCdcCalColFittings := SelectLayer("CdcCalColFittings")
CdcCalColFittingsFrz := FreezeLayer("CdcCalColFittings")
ThawCdcCalColFittings := ThawMultiple(["CdcCalColFittings"])
CdcCalColDeleteLayer := layer_new("CdcCalColDelete", purple)
SelectCdcCalColDelete := SelectLayer("CdcCalColDelete")
CdcCalColDeleteFrz := FreezeLayer("CdcCalColDelete")
CdcCCValveLayer := layer_new("CdcCCValve", purple)
SelectCdcCCValve := SelectLayer("CdcCCValve")
CdcCCValveFrz := FreezeLayer("CdcCCValve")
# Dimensions
L_PVCBallValveOLD := .1625 m/2
B_DosingTubes := max(TeeLength(ND_DeliveryPipe) + 2*SocketDepth(ND_DeliveryPipe), 2*ElbowRadius(ND_DeliveryPipe) + 2*SocketDepth(ND_DeliveryPipe))
# This needs to be changed in the entire code bc this is confusing
L_CoagDeliveryPipe.Old := L_CoagTube + 2*L_PVCBallValve + 2*ShortTeeLength(ND_DeliveryPipe) + ElbowRadius(ND_DeliveryPipe) + OR_Fitting(ND_DeliveryPipe)
L_ChlorDeliveryPipeOLD := L_ChlorTube + 2*L_PVCBallValve + 2*ShortTeeLength(ND_DeliveryPipe) + ElbowRadius(ND_DeliveryPipe) + OR_Fitting(ND_DeliveryPipe)
L_DosingConnectors := L_PVCBallValve + SocketDepth(ND_DeliveryPipe)
CdcLeverArm_Origin[0] + S_CdcLevertoManifold + OR_Fitting(ND_DeliveryPipe) + 2*ShortTeeLength(ND_DeliveryPipe) + 2*L_PVCBallValve + L_ChlorTube + 2*SocketDepth(ND_DeliveryPipe) - ElbowRadius(ND_DeliveryPipe)
# Lever Dimensions
# Perpendicular distance from LeverArm.Origin to the Float Cable
L_CdcLeverHoriz := (L_CdcLeverArm^2 - HL_Lfom^2)^.5 = 0.458258 m
# Maybe I can delete these since the lever is rotated
L_CdcLeverVert := HL_Lfom = 0.2 m  # Distance from the top most part of the Lever Arm on an angle to the height of the Lever Arm Pivot
AN_CdcLever := asin(HL_Lfom/L_CdcLever)/deg = 23.5782
L_CdcLeverArmExtended := L_CdcLeverSlider + D_CdcLeverCylinder4 - L_CdcLeverSliderOriginToScrew = 4 in
L_CoagDeliveryConnectorPipeLong := SocketDepth(ND_DeliveryPipe) + S_Fitting + ElbowRadius(ND_DeliveryPipe) + OR(ND_DeliveryPipe) = 0.092418 m
# Calibration Column Definitions | mrf222 Spring 2016
SF_CalCol := 1.25
Ti_Res := 1.25*min
H_CalCol := 30 cm
# Modified March 2016 by mrf222
H_FlowCalCol := 50 cm
Z_ChlorCalColTop := ChlorineTank_Origin[2] + H_ChlorTank = 3.77402 m
Z_CoagCalColTop := CoagTank_Origin[2] + H_CoagTank = 3.94312 m
Q_CoagCalColMax := SF_CalCol*Q_CoagMax
Vol_CoagCalCol := Ti_Res*Q_CoagCalColMax
D_inCoagCCMin := sqrt(4*Vol_CoagCalCol/(π*H_CalCol)) = 1.72055 in
# This diameter of pipe does not have fittings associated wiht it; therefore the plumbing needs to be the lowest diameter that has tee and elbow radii associated with it. The same is true for the coagulant ND.
ND_CoagCalColTrue := ND(D_inCoagCCMin, Sch40) = 0.125 in
ND_CoagCalCol :=
    ND ← ND_CoagCalColTrue
    while TeeLength(ND) == 0
        ND ← ND + .125 in
    return ND
D_inCoagCalCol := ID(ND_CoagCalCol, Sch40) = 0.622 in
Q_ChlorCalColMax := SF_CalCol*Q_ChlorMax
Vol_ChlorCalCol := Ti_Res*Q_ChlorCalColMax
D_inChlorCCMin := sqrt(4*Vol_ChlorCalCol/(π*H_CalCol)) = 1.79865 in
ND_ChlorCalColTrue := ND(D_inChlorCCMin, Sch40)
ND_ChlorCalCol :=
    ND ← ND_ChlorCalColTrue
    while TeeLength(ND) == 0
        ND ← ND + .125 in
    return ND
D_inChlorCalCol := ID(ND_ChlorCalCol, Sch40) = 0.622 in
Q_FCCalColMax := SF_CalCol*Q_CoagMax
Vol_FCCalCol := Ti_Res*Q_FCCalColMax
D_inFCCCMin := sqrt(4*Vol_FCCalCol/(π*H_CalCol)) = 1.72055 in
ND_FCCalCol := ND(D_inFCCCMin, Sch40)
D_inFCCalCol := ID(ND_FCCalCol, Sch40) = 0.269 in
R_Cylinder := .5 cm
# Lever and Dosing Origin Points
# Lever Origin Points
# the x and y coordinates of LA.Origin were changed to those of the DosingSubBox.Origin
CdcLeverArm_Origin := [
    Et_Origin[0] - L_Et + L_EtFrontWallToFloat + OR_Fitting(ND_EtFloat) - OR_Fitting(ND_EtFloat) + OR(ND_EtFloat) - L_CdcLeverCylinder/2 - T_CdcLeverArm;
    Et_Origin[1] + W_Et + T_FlocWall - W_CdcLeverPivotBox/2;
    Z_EtTop + S_LeverToEtZTop
] = [-5.09587; 6.2273; 2.61542] m
CdcLeverArm2_Origin := [
    CdcLeverArm_Origin[0] + L_CdcLeverCylinder + T_CdcLeverArm;
    CdcLeverArm_Origin[1];
    CdcLeverArm_Origin[2]
] = [-4.9403; 6.2273; 2.61542] m
CdcLeverDropTubeScrew_Origin := [
    CdcLeverArm_Origin[0] - T_CdcLeverSlider;
    CdcLeverArm_Origin[1] + L_CdcLeverArm;
    CdcLeverArm_Origin[2] + H_CdcLeverArm/2
] = [-5.10222; 6.7273; 2.62812] m
CdcLeverDropTubeScrew2_Origin := [
    CdcLeverDropTubeScrew_Origin[0] + T_CdcLeverSlider + T_CdcLeverArm + L_CdcLeverCylinder + T_CdcLeverArm + T_CdcLeverSlider;
    CdcLeverDropTubeScrew_Origin[1];
    CdcLeverDropTubeScrew_Origin[2]
] = [-4.93077; 6.7273; 2.62812] m
CdcLeverDropTubeTee_Origin := [
    CdcLeverDropTubeScrew_Origin[0] - OD(ND_DropTube)/2 - T_CdcLeverSlider - ShortTeeLength(ND_DropTube) + (OD_Fitting(ND_DeliveryPipe)/2 - OD(ND_DeliveryPipe)/2);
    CdcLeverDropTubeScrew_Origin[1];
    CdcLeverDropTubeScrew_Origin[2] - SocketDepth(ND_DropTube) - TeeLength(ND_DropTube)/2
] = [-5.13077; 6.7273; 2.59637] m
CdcLeverDropTube2Tee_Origin := [
    CdcLeverDropTubeScrew2_Origin[0] + OD(ND_DropTube)/2 + T_CdcLeverSlider + ShortTeeLength(ND_DropTube) - (OD_Fitting(ND_DeliveryPipe)/2 - OD(ND_DeliveryPipe)/2);
    CdcLeverDropTubeScrew2_Origin[1];
    CdcLeverDropTubeScrew2_Origin[2] - SocketDepth(ND_DropTube) - TeeLength(ND_DropTube)/2
]
CdcLeverDropTube_Origin := [
    CdcLeverDropTubeTee_Origin[0] + ShortTeeLength(ND_DropTube);
    CdcLeverDropTubeTee_Origin[1];
    CdcLeverDropTubeTee_Origin[2]
]
CdcLeverDropTube2_Origin := [
    CdcLeverDropTube2Tee_Origin[0] - ShortTeeLength(ND_DropTube);
    CdcLeverDropTube2Tee_Origin[1];
    CdcLeverDropTube2Tee_Origin[2]
]
CdcLeverSlider2_Origin := [
    CdcLeverDropTubeScrew2_Origin[0];
    CdcLeverDropTubeScrew2_Origin[1] - L_CdcLeverSliderOriginToScrew;
    CdcLeverDropTubeScrew2_Origin[2] + H_CdcLeverSlider/2
] = [-4.93077; 6.7019; 2.64717] m
CdcLeverSlider1_Origin := [
    CdcLeverDropTubeScrew_Origin[0];
    CdcLeverDropTubeScrew_Origin[1] - L_CdcLeverSliderOriginToScrew;
    CdcLeverDropTubeScrew_Origin[2] + H_CdcLeverSlider/2
] = [-5.10222; 6.7019; 2.64717] m
CdcLeverSliderMiddleTop_Origin := [CdcLeverSlider1_Origin[0] + T_CdcLeverSlider; CdcLeverSlider1_Origin[1]; CdcLeverSlider1_Origin[2]] = [-5.09587; 6.7019; 2.64717] m
CdcLeverSliderMiddleTop2_Origin := [CdcLeverSlider2_Origin[0] - T_CdcLeverSlider; CdcLeverSlider2_Origin[1]; CdcLeverSlider2_Origin[2]] = [-4.93712; 6.7019; 2.64717] m
CdcLeverSliderMiddleBot_Origin := [
    CdcLeverSliderMiddleTop_Origin[0];
    CdcLeverSliderMiddleTop_Origin[1];
    CdcLeverSliderMiddleTop_Origin[2] - H_CdcLeverSlider + T_CdcLeverSlider
] = [-5.09587; 6.7019; 2.61542] m
CdcLeverSliderMiddleBot2_Origin := [
    CdcLeverSliderMiddleTop2_Origin[0];
    CdcLeverSliderMiddleTop2_Origin[1];
    CdcLeverSliderMiddleTop2_Origin[2] - H_CdcLeverSlider + T_CdcLeverSlider
] = [-4.93712; 6.7019; 2.61542] m
CdcLeverSliderInnerTop_Origin := [
    CdcLeverSliderMiddleTop_Origin[0] + T_CdcLeverArm;
    CdcLeverSliderMiddleTop_Origin[1];
    CdcLeverSliderMiddleTop_Origin[2]
] = [-5.0927; 6.7019; 2.64717] m
CdcLeverSliderInnerTop2_Origin := [
    CdcLeverSliderMiddleTop2_Origin[0] - T_CdcLeverArm;
    CdcLeverSliderMiddleTop2_Origin[1];
    CdcLeverSliderMiddleTop2_Origin[2]
] = [-4.9403; 6.7019; 2.64717] m
CdcLeverSliderInnerBot_Origin := [
    CdcLeverSliderInnerTop_Origin[0];
    CdcLeverSliderInnerTop_Origin[1];
    CdcLeverSliderInnerTop_Origin[2] - H_CdcLeverSlider + 2*T_CdcLeverSlider
] = [-5.0927; 6.7019; 2.62177] m
CdcLeverSliderInnerBot2_Origin := [
    CdcLeverSliderInnerTop2_Origin[0];
    CdcLeverSliderInnerTop2_Origin[1];
    CdcLeverSliderInnerTop2_Origin[2] - H_CdcLeverSlider + 2*T_CdcLeverSlider
] = [-4.9403; 6.7019; 2.62177] m
CdcLeverPivotBox_Origin := [
    (CdcLeverArm_Origin[0] + L_CdcLeverCylinder/3) + T_CdcLeverArm;
    CdcLeverArm_Origin[1] + W_CdcLeverPivotBox/2;
    Z_EtTop + H_CdcLeverPivotBox
]
CdcFloat_Origin := [
    (Et_Origin[0] - L_Et + L_EtFrontWallToFloat + OR_Fitting(ND_EtFloat)) + OR(ND_EtFloat);
    CdcLeverArm_Origin[1] - L_CdcLeverHoriz - D_CdcLeverCylinder1/4;
    ZW_EtMax - T_CdcFloat/2
] = [-4.89823; 5.76269; 2.48042] m
# Dosing Tube Origins
N_TubesTriggerStack := 2
L_CoagDeliveryPipe := S_CdcLevertoManifold + OR_Fitting(ND_DeliveryPipe) + 2*ShortTeeLength(ND_DeliveryPipe) + 2*L_PVCBallValve + L_CoagTube + 2*SocketDepth(ND_DeliveryPipe) - 2*ElbowRadius(ND_DeliveryPipe) + (OR(ND_DeliveryPipe) + ShortTeeLength(ND_DeliveryPipe) + SocketDepth(ND_DeliveryPipe) + L_PVCBallValve + S_Fitting) + (OR(ND_DeliveryPipe) + S_Fitting + ElbowRadius(ND_DeliveryPipe))
L_ChlorDeliveryPipe := S_CdcLevertoManifold + OR_Fitting(ND_DeliveryPipe) + 2*ShortTeeLength(ND_DeliveryPipe) + 2*L_PVCBallValve + L_ChlorTube + 2*SocketDepth(ND_DeliveryPipe) - 2*ElbowRadius(ND_DeliveryPipe)
OR_Fitting(ND_DeliveryPipe) = 0.0138906 m  # Something is wrong with the ELBOW by the chlor delivery pipe!
# The first case triggers when both N values are equalt to 1, in other words when there are
# two Coag dosing tubes and two Chlor dosing tubes. This case will stack the dosing manifolds.
ChlorDeliveryPipe_Origin :=
    if N_CoagTubes + N_ChlorTubes ≤ N_TubesTriggerStack
        [
            L_ChlorDeliveryPipe;
            CdcLeverArm_Origin[1] + OD_Fitting(ND_DeliveryPipe);
            Z_Walkway + 1.5*OR_Fitting(ND_DeliveryPipe) + (N_CoagTubes + 2)*B_DosingTubes + ElbowRadius(ND_DeliveryPipe) + SocketDepth(ND_DeliveryPipe)
        ]
    if L_CoagDeliveryPipe ≤ L_ChlorDeliveryPipe
        [
            (Et_Origin[0] - L_Et + L_EtFrontWallToFloat + OR_Fitting(ND_EtFloat)) - ElbowRadius(ND_DeliveryPipe) + 2*OR_Fitting(ND_EtFloat) + L_ChlorDeliveryPipe;
            CdcLeverArm_Origin[1] + OD_Fitting(ND_DeliveryPipe);
            Z_Walkway + OR_Fitting(ND_DeliveryPipe) + S_Fitting
        ]
    otherwise
        [
            (Et_Origin[0] - L_Et + L_EtFrontWallToFloat + OR_Fitting(ND_EtFloat)) - ElbowRadius(ND_DeliveryPipe) + OR_Fitting(ND_EtFloat) + L_ChlorDeliveryPipe;
            CdcLeverArm_Origin[1] + OD_Fitting(ND_DeliveryPipe);
            Z_Walkway + 1.5*OR_Fitting(ND_DeliveryPipe) - ((-ElbowRadius(ND_DeliveryPipe) - OR_Fitting(ND_DeliveryPipe)/2 + 2*SocketDepth(ND_DeliveryPipe) + .5*TeeLength(ND_DeliveryPipe)) - S_Fitting - 2*OR_Fitting(ND_DeliveryPipe))
        ]
# The second case will nest the dosing manifolds with the chlorine delivery pipe on the bottom.
# The third case will nest the dosing manifolds with the coagulant delivery pipe on the bottom.
ChlorDosingTube_Origin :=
    if N_CoagTubes + N_ChlorTubes ≤ N_TubesTriggerStack
        ChlorDeliveryPipe_Origin + [
            ElbowRadius(ND_DeliveryPipe) - L_ChlorTube - L_PVCBallValve - SocketDepth(ND_DeliveryPipe) - ShortTeeLength(ND_DeliveryPipe);
            0 m;
            L_CoagDeliveryConnectorPipeLong + ElbowRadius(ND_DeliveryPipe) + 2*SocketDepth(ND_DeliveryPipe) + .5*TeeLength(ND_DeliveryPipe) + 2*OR_Fitting(ND_DeliveryPipe)
        ]
    otherwise
        ChlorDeliveryPipe_Origin + [
            ElbowRadius(ND_DeliveryPipe) - L_ChlorTube - L_PVCBallValve - SocketDepth(ND_DeliveryPipe) - ShortTeeLength(ND_DeliveryPipe);
            0 m;
            2*OR(ND_DeliveryPipe) + 2*S_Fitting + 2*ElbowRadius(ND_DeliveryPipe) + L_CoagDeliveryConnectorPipeLong + N_CoagTubes*(TeeLength(ND_DeliveryPipe) + 2*SocketDepth(ND_DeliveryPipe))
        ]
L_ChlorDeliveryPipe = 2.28984 m
L_ChlorTube = 1.7607 m
L_CoagDeliveryConnectorPipeLong + ElbowRadius(ND_DeliveryPipe) + S_Fitting + N_CoagTubes*(TeeLength(ND_DeliveryPipe) + 2*SocketDepth(ND_DeliveryPipe)) + 2*SocketDepth(ND_DeliveryPipe) + 2*OR(ND_DeliveryPipe)
OffsetCoagChlor :=
    if N_CoagTubes + N_ChlorTubes ≤ N_TubesTriggerStack
        [
            0 m;
            0 m;
            -((N_CoagTubes + 2)*B_DosingTubes + ElbowRadius(ND_DeliveryPipe) + SocketDepth(ND_DeliveryPipe) - 2*OR_Fitting(ND_DeliveryPipe))
        ]
    if L_CoagDeliveryPipe ≤ L_ChlorDeliveryPipe
        [
            OR(ND_DeliveryPipe) + L_PVCBallValve + SocketDepth(ND_DeliveryPipe) + ShortTeeLength(ND_DeliveryPipe) + S_Fitting;
            0 m;
            -S_Fitting - ElbowRadius(ND_DeliveryPipe) - N_CoagTubes*(TeeLength(ND_DeliveryPipe) + 2*SocketDepth(ND_DeliveryPipe)) + 0.5*TeeLength(ND_DeliveryPipe)
        ]
    otherwise
        [
            OR(ND_DeliveryPipe) + L_PVCBallValve + SocketDepth(ND_DeliveryPipe) + ShortTeeLength(ND_DeliveryPipe) + S_Fitting;
            0 m;
            (-S_Fitting - ElbowRadius(ND_DeliveryPipe) - N_CoagTubes*(TeeLength(ND_DeliveryPipe) + 2*SocketDepth(ND_DeliveryPipe))) + 0.5*TeeLength(ND_DeliveryPipe)
        ]
CdcLeverArm_Origin = [-5.09587; 6.2273; 2.61542] m
CoagDosingTube_Origin := OffsetCoagChlor + ChlorDosingTube_Origin
CoagDeliveryPipe_Origin := CoagDosingTube_Origin + [
    -ElbowRadius(ND_DeliveryPipe) + ShortTeeLength(ND_DeliveryPipe) + SocketDepth(ND_DeliveryPipe) + L_PVCBallValve + L_CoagTube;
    0 m;
    -ElbowRadius(ND_DeliveryPipe) - L_CoagDeliveryConnectorPipeLong - .5*TeeLength(ND_DeliveryPipe)
] = [-2.71896; 6.25508; 1.49022] m
# Connection Origin Points between Lever arm, dosing tubes, and calibration columns:
ChlorDeliveryPipe_Origin = [-2.49614; 6.25508; 1.41888] m
CoagDeliveryPipe_Origin = [-2.71896; 6.25508; 1.49022] m
CoagDosingTube_Origin = [-4.18142; 6.25508; 1.61214] m
N_ChlorTubes = 3
N_CoagTubes = 3
CoagDelivTElbow_Origin := CoagDosingTube_Origin + [L_CoagTube + L_PVCBallValve + SocketDepth(ND_DeliveryPipe); 0 m; -TeeLength(ND_CoagPipe)/2]
ChlorDelivTElbow_Origin := ChlorDosingTube_Origin + [L_ChlorTube + L_PVCBallValve + SocketDepth(ND_DeliveryPipe); 0 m; -TeeLength(ND_ChlorPipe)/2]
# Origins and Endpoints of the flexible tubing connecting the lever arm to the dosing system:
# Rotate the end points of the flexible tubes to the tees
# Origin of the rotation: | Angle of rotation:
yDropTee_dist := CdcLeverDropTubeTee_Origin[1] - CdcLeverArm_Origin[1] = 0.5 m
yDropTee_ang := sin(AN_CdcLever*deg) = 0.4
zDropTee_ang := cos(AN_CdcLever*deg) = 0.916515
AdjustFlexOrigin := [
    0 m;
    -yDropTee_dist*yDropTee_ang^2 + TeeLength(ND_CoagPipe)/2 + SocketDepth(ND_CoagPipe);
    -yDropTee_dist*zDropTee_ang*yDropTee_ang - TeeLength(ND_CoagPipe)/2
]
# The chlorine line will connect to the filter; the coagulant line will drop into the rapid mix pipe
Flex9_Origin := CdcLeverDropTubeTee_Origin + AdjustFlexOrigin
Flex10_Origin := CdcLeverDropTube2Tee_Origin + AdjustFlexOrigin
Flex9_End := CoagDelivTElbow_Origin + [
    -L_CoagTube + (-ElbowRadius(ND_CoagPipe)) - 2*S_Fitting - ShortTeeLength(ND_CoagPipe);
    0 m;
    -ElbowRadius(ND_CoagPipe)
]
Flex10_End := ChlorDelivTElbow_Origin + [
    -L_ChlorTube + (-ElbowRadius(ND_ChlorPipe)) - 2*S_Fitting - ShortTeeLength(ND_ChlorPipe);
    0 m;
    -ElbowRadius(ND_ChlorPipe)
]
# Connection plumbing around the entrance tank towards the constant head tanks
# Assume that there are couplings instead of Elbows or Tees at the end of the delivery pipes
Et_Origin = [-4.42982; 5.54; 0.15] m
ChlorElbowDtoC1_Origin := [
    Et_Origin[0] - L_Et - T_PlantWall - OR_Fitting(ND_ChlorPipe) + ElbowRadius(ND_ChlorPipe);
    Et_Origin[1] + W_Et + T_PlantWall + OR_Fitting(ND_ChlorPipe);
    ChlorDeliveryPipe_Origin[2]
]
W_Et = 0.55 m
L_Et = 1.47269 m
CoagElbowDtoC1_Origin := [
    Et_Origin[0] - L_Et - T_PlantWall - OR_Fitting(ND_CoagPipe) + ElbowRadius(ND_CoagPipe);
    Et_Origin[1] + W_Et + T_PlantWall + OR_Fitting(ND_CoagPipe);
    CoagDeliveryPipe_Origin[2]
]
T_PlantWall = 0.15 m
CoagElbowDtoC2_Origin := [
    CoagElbowDtoC1_Origin[0] - ElbowRadius(ND_CoagPipe);
    Coag1DrainElbow1_Origin[1] + S_Fitting;
    CoagElbowDtoC1_Origin[2] - ElbowRadius(ND_CoagPipe)
]
# There needs to be an elbow bridge (using 45 degree elbows) over the coag tubing.
# Only for Autocad 2015
OD_Fitting(ND_CoagPipe) = 0.0277813 m
E45DtoC_Origin := [
    ChlorElbowDtoC1_Origin[0] - ElbowRadius(ND_ChlorPipe);
    CoagElbowDtoC2_Origin[1] + 2*ElbowRadius(ND_ChlorPipe)*sin(45 deg) + 2*SocketDepth(ND_ChlorPipe)*sin(45) + SocketDepth(ND_ChlorPipe);
    ChlorElbowDtoC1_Origin[2]
]
# Currently in use: Autocad 2013
E45DtoC_Origin := [
    ChlorElbowDtoC1_Origin[0] - ElbowRadius(ND_ChlorPipe);
    CoagElbowDtoC2_Origin[1] + 2*ElbowRadius(ND_ChlorPipe) + SocketDepth(ND_ChlorPipe);
    ChlorElbowDtoC1_Origin[2]
]
# Required due to 45 degree elbow function
E45pipe := .0035 m
E45DtoC_Origin + [
    -2*ElbowRadius(ND_ChlorPipe)*(1 - sin(45 deg)) - 2*test*sin(45);
    -2*ElbowRadius(ND_ChlorPipe)*sin(45 deg) - 2*test*sin(45) - 2*test;
    0 m
]
ChlorElbowDtoC2_Origin := [
    ChlorElbowDtoC1_Origin[0] - ElbowRadius(ND_ChlorPipe);
    Chlor2DrainElbow1_Origin[1] - S_Fitting;
    ChlorElbowDtoC1_Origin[2] - ElbowRadius(ND_ChlorPipe)
]
CoagElbowDtoC3_Origin := [
    CoagElbowDtoC2_Origin[0];
    CoagElbowDtoC2_Origin[1];
    Z_Walkway - ElbowRadius(ND_CoagPipe) - OR_Fitting(ND_CoagPipe) - T_PlantFloor
]
ChlorElbowDtoC3_Origin := [ChlorElbowDtoC2_Origin[0]; ChlorElbowDtoC2_Origin[1]; CoagElbowDtoC3_Origin[2]]
CoagElbowDtoC4_Origin := [Coag1DrainElbow1_Origin[0]; CoagElbowDtoC3_Origin[1]; CoagElbowDtoC3_Origin[2]]
ChlorElbowDtoC4_Origin := [Chlor1DrainElbow1_Origin[0]; ChlorElbowDtoC3_Origin[1]; ChlorElbowDtoC3_Origin[2]]
CoagTeeDtoC_Origin := [
    CoagElbowDtoC4_Origin[0];
    CoagElbowDtoC4_Origin[1] + ShortTeeLength(ND_CoagPipe);
    Z_Walkway + S_Fitting + TeeLength(ND_CoagPipe)/2 + ElbowRadius(ND_CoagPipe) + 2*SocketDepth(ND_ChlorPipe)
]
ChlorTeeDtoC_Origin := [
    ChlorElbowDtoC4_Origin[0];
    ChlorElbowDtoC4_Origin[1] - ShortTeeLength(ND_ChlorPipe);
    Z_Walkway + S_Fitting + TeeLength(ND_ChlorPipe)/2 + ElbowRadius(ND_ChlorPipe) + 2*SocketDepth(ND_ChlorPipe)
]
CoagElbowDtoC5_Origin := [
    CoagTeeDtoC_Origin[0];
    CoagTeeDtoC_Origin[1] + ElbowRadius(ND_CoagPipe) + 2*SocketDepth(ND_CoagPipe);
    CoagTeeDtoC_Origin[2] + ElbowRadius(ND_CoagPipe)
]
ChlorElbowDtoC5_Origin := [
    ChlorTeeDtoC_Origin[0];
    ChlorTeeDtoC_Origin[1] - ElbowRadius(ND_ChlorPipe) - 2*SocketDepth(ND_ChlorPipe);
    ChlorTeeDtoC_Origin[2] + ElbowRadius(ND_ChlorPipe)
]
CtoDValve1 := CoagElbowDtoC5_Origin + [0 m; 0 m; SocketDepth(ND_CoagPipe)]
CtoDValve2 := CoagTeeDtoC_Origin + [0 m; -ShortTeeLength(ND_CoagPipe); TeeLength(ND_CoagPipe)/2 + SocketDepth(ND_CoagPipe)]
CtoDValve3 := ChlorTeeDtoC_Origin + [0 m; ShortTeeLength(ND_ChlorPipe); TeeLength(ND_ChlorPipe)/2 + SocketDepth(ND_ChlorPipe)]
CtoDValve4 := ChlorElbowDtoC5_Origin + [0 m; 0 m; SocketDepth(ND_ChlorPipe)]
Flex5_End := CtoDValve2 + [0 m; 0 m; S_Fitting]
Flex6_End := CtoDValve1 + [0 m; 0 m; S_Fitting] = [-7.03862; 6.21739; 1.55024] m
Flex7_End := CtoDValve4 + [0 m; 0 m; S_Fitting]
Flex8_End := CtoDValve3 + [0 m; 0 m; S_Fitting]
# Pipe Connection Origins
DtoCPipe1_Origin := CoagElbowDtoC1_Origin
DtoCPipe2_Origin := ChlorElbowDtoC1_Origin
DtoCPipe3_Origin := CoagElbowDtoC2_Origin + [0 m; ElbowRadius(ND_CoagPipe); ElbowRadius(ND_CoagPipe)]
DtoCPipe4_Origin := ChlorElbowDtoC2_Origin + [0 m; ElbowRadius(ND_ChlorPipe); ElbowRadius(ND_ChlorPipe)]
DtoCPipe5_Origin := CoagElbowDtoC3_Origin
DtoCPipe6_Origin := ChlorElbowDtoC3_Origin
DtoCPipe7_Origin := CoagElbowDtoC4_Origin + [ElbowRadius(ND_CoagPipe); 0 m; -ElbowRadius(ND_CoagPipe)]
DtoCPipe8_Origin := ChlorElbowDtoC4_Origin + [ElbowRadius(ND_ChlorPipe); 0 m; -ElbowRadius(ND_ChlorPipe)]
DtoCPipe9_Origin := CoagElbowDtoC4_Origin
DtoCPipe10_Origin := ChlorElbowDtoC4_Origin
DtoCPipe11_Origin := CoagTeeDtoC_Origin
DtoCPipe12_Origin := ChlorTeeDtoC_Origin
DtoCPipe13_Origin := CtoDValve1
DtoCPipe14_Origin := CtoDValve2
DtoCPipe15_Origin := CtoDValve3
DtoCPipe16_Origin := CtoDValve4
# Calibration Origin Points | mrf222 Spring 2016
# Calibration Columns
# Fluid Level and Flow Columns
CoagFluidCol_Origin := CoagCCElbow2_Origin
ChlorFluidCol_Origin := ChlorCCElbow1_Origin
CoagFlowTee_Origin := [
    CoagCCElbow1_Origin[0];
    CoagCCElbow1_Origin[1] + ShortTeeLength(ND_CoagPipe);
    CoagCCElbow1_Origin[2] + 2*SocketDepth(ND_CoagPipe) + TeeLength(ND_CoagPipe)/2 + 2*S_Fitting
]
ChlorFlowTee_Origin := [
    ChlorCCElbow2_Origin[0];
    ChlorCCElbow2_Origin[1] - ShortTeeLength(ND_CoagPipe);
    ChlorCCElbow2_Origin[2] + 2*SocketDepth(ND_CoagPipe) + TeeLength(ND_CoagPipe)/2 + 2*S_Fitting
]
CoagFlowCol_Origin := [
    CoagCCElbow1_Origin[0];
    CoagCCElbow1_Origin[1];
    CoagCCElbow1_Origin[2] + 2*SocketDepth(ND_CoagPipe) + TeeLength(ND_CoagPipe) + 2*S_Fitting
]
ChlorFlowCol_Origin := [
    ChlorCCElbow2_Origin[0];
    ChlorCCElbow2_Origin[1];
    ChlorCCElbow2_Origin[2] + 2*SocketDepth(ND_CoagPipe) + TeeLength(ND_ChlorPipe) + 2*S_Fitting
]
CoagFlowCoupling_Origin := [CoagFlowCol_Origin[0]; CoagFlowCol_Origin[1]; CoagFlowCol_Origin[2] + H_FlowCalCol]
ChlorFlowCoupling_Origin := [ChlorFlowCol_Origin[0]; ChlorFlowCol_Origin[1]; ChlorFlowCol_Origin[2] + H_FlowCalCol]
CoagFlowSolidPipe_Origin := [
    CoagFlowCoupling_Origin[0];
    CoagFlowCoupling_Origin[1];
    CoagFlowCoupling_Origin[2] + CouplingLength(ND_CoagPipe) - 2*SocketDepth(ND_CoagPipe)
]
ChlorFlowSolidPipe_Origin := [
    ChlorFlowCoupling_Origin[0];
    ChlorFlowCoupling_Origin[1];
    ChlorFlowCoupling_Origin[2] + CouplingLength(ND_CoagPipe) - 2*SocketDepth(ND_ChlorPipe)
]
# Caps for Calibration Columns
CoagTopCap1_Origin := [CoagFlowSolidPipe_Origin[0]; CoagFlowSolidPipe_Origin[1]; Z_ChlorCalColTop]
CoagTopCap2_Origin := [CoagFluidCol_Origin[0]; CoagFluidCol_Origin[1]; Z_ChlorCalColTop]
ChlorTopCap1_Origin := [ChlorFluidCol_Origin[0]; ChlorFluidCol_Origin[1]; Z_ChlorCalColTop]
ChlorTopCap2_Origin := [ChlorFlowSolidPipe_Origin[0]; ChlorFlowSolidPipe_Origin[1]; Z_ChlorCalColTop]
# To draw the hole in the top cap, we are subtracting a cylinder from the top cap layer
CoagCylinder1_Origin := [CoagTopCap1_Origin[0]; CoagTopCap1_Origin[1]; CoagTopCap1_Origin[2] - S_Fitting]
CoagCylinder2_Origin := [CoagTopCap2_Origin[0]; CoagTopCap2_Origin[1]; CoagTopCap2_Origin[2] - S_Fitting]
ChlorCylinder1_Origin := [ChlorTopCap1_Origin[0]; ChlorTopCap1_Origin[1]; ChlorTopCap1_Origin[2] - S_Fitting]
ChlorCylinder2_Origin := [ChlorTopCap2_Origin[0]; ChlorTopCap2_Origin[1]; ChlorTopCap2_Origin[2] - S_Fitting]
# Connections from the calibration columns to the constant head tanks
CoagTee2_Origin := [
    CoagFlowTee_Origin[0];
    CoagFlowTee_Origin[1] + TeeLength(ND_CoagPipe)/2 + 2*SocketDepth(ND_CoagPipe);
    CoagFlowTee_Origin[2] - ShortTeeLength(ND_CoagPipe)
]
ChlorTee2_Origin := [
    ChlorFlowTee_Origin[0];
    ChlorFlowTee_Origin[1] - TeeLength(ND_ChlorPipe)/2 - 2*SocketDepth(ND_ChlorPipe);
    ChlorFlowTee_Origin[2] - ShortTeeLength(ND_ChlorPipe)
]
CoagElbow1_Origin := [
    CoagTee2_Origin[0];
    CoagTee2_Origin[1] + TeeLength(ND_CoagPipe)/2 + 2*SocketDepth(ND_CoagPipe) + ElbowRadius(ND_CoagPipe);
    CoagTee2_Origin[2] + ShortTeeLength(ND_CoagPipe) - ElbowRadius(ND_CoagPipe)
]
ChlorElbow1_Origin := [
    ChlorTee2_Origin[0];
    ChlorTee2_Origin[1] - TeeLength(ND_ChlorPipe)/2 - 2*SocketDepth(ND_ChlorPipe) - ElbowRadius(ND_ChlorPipe);
    ChlorTee2_Origin[2] + ShortTeeLength(ND_ChlorPipe) - ElbowRadius(ND_ChlorPipe)
]
CoagPipe2_Origin := [CoagFlowTee_Origin[0]; CoagFlowTee_Origin[1]; CoagFlowTee_Origin[2]]
ChlorPipe2_Origin := [ChlorFlowTee_Origin[0]; ChlorFlowTee_Origin[1]; ChlorFlowTee_Origin[2]]
CoagPipe3_Origin := [
    CoagTee2_Origin[0];
    CoagTee2_Origin[1] + TeeLength(ND_CoagPipe)/2;
    CoagTee2_Origin[2] + ShortTeeLength(ND_CoagPipe)
]
ChlorPipe3_Origin := [
    ChlorTee2_Origin[0];
    ChlorTee2_Origin[1] + TeeLength(ND_ChlorPipe)/2;
    ChlorTee2_Origin[2] + ShortTeeLength(ND_ChlorPipe)
]
# Valves to connect directly to the flexible tubing
CoagValve1_Origin := [
    CoagElbow1_Origin[0];
    CoagElbow1_Origin[1];
    CoagElbow1_Origin[2] - 2*SocketDepth(ND_CoagPipe) - S_Fitting
]
CoagValve2_Origin := [
    CoagTee2_Origin[0];
    CoagTee2_Origin[1];
    CoagTee2_Origin[2] - 2*SocketDepth(ND_CoagPipe) - S_Fitting
]
ChlorValve1_Origin := [
    ChlorElbow1_Origin[0];
    ChlorElbow1_Origin[1];
    ChlorElbow1_Origin[2] - 2*SocketDepth(ND_ChlorPipe) - S_Fitting
]
# These would all have to be oriented down if the origin point is inside the valve socket (-90)
ChlorValve2_Origin := [
    ChlorTee2_Origin[0];
    ChlorTee2_Origin[1];
    ChlorTee2_Origin[2] - 2*SocketDepth(ND_ChlorPipe) - S_Fitting
]
# MOVE THESE
# Z_CoagulantOutlet | was set equal to Z.FloatTop
# Pipes connecting to the valves
CoagPipe4_Origin := CoagElbow1_Origin
ChemPlatform_Origin[0] + ChemPlatform_Dimensions[0] + T_PlantWall + 1/2*D_CHT
ChlorPipe4_Origin := ChlorElbow1_Origin
CoagPipe5_Origin := CoagTee2_Origin
ChemPlatform_Origin[1] - 1/2*D_CHT + ChemPlatform_Dimensions[1] - T_PlantWall - 1.5*D_CHT
ChlorPipe5_Origin := ChlorTee2_Origin
ZW_CdcCht
# Constant Head Tanks
# The origin of the valve must be higher than the height of water in the CHTs
# Constant Head Tank Origins
ChlorValve2_Origin[2] ≥ ZW_CdcCht = 1
CHT1_Origin := [
    CoagValve1_Origin[0] + 1/2*D_CHT - OR_Fitting(ND_CoagPipe);
    CoagValve1_Origin[1] + 1/2*D_CHT + 2*S_Fitting;
    ZW_CdcCht
] = [-7.00251; 6.38089; 2.67312] m
CHT2_Origin := [CHT1_Origin[0]; CHT1_Origin[1] + 1.5*D_CHT + S_Fitting; CHT1_Origin[2]]
CHT3_Origin := [
    ChlorValve1_Origin[0] + 1/2*D_CHT - OR_Fitting(ND_ChlorPipe);
    ChlorValve1_Origin[1] - 1/2*D_CHT - 2*S_Fitting;
    ZW_CdcCht
]
CHT4_Origin := [CHT3_Origin[0]; CHT3_Origin[1] - 1.5*D_CHT - S_Fitting; CHT3_Origin[2]]
# Connections between dosing tubes and CHTs
# How to sweep!
# 1. define origin points
# 2. define end points
# 3. draw a circle
# 4. draw a spline between these points
# 5. sweep the circle along the path (select the circle by selecting all and then removing the circle!)
Flex1_Origin := CoagValve1_Origin
Flex2_Origin := CoagValve2_Origin
Flex3_Origin := ChlorValve2_Origin
Flex4_Origin := ChlorValve1_Origin
Flex1_End := CHT1_Origin + [D_CHT/2; 0; .75*H_CHT + T_CHTwall + .125 in]
Flex2_End := CHT2_Origin + [D_CHT/2; 0; .75*H_CHT + T_CHTwall + .125 in]
Flex3_End := CHT4_Origin + [D_CHT/2; 0; .75*H_CHT + T_CHTwall + .125 in]
Flex4_End := CHT3_Origin + [D_CHT/2; 0; .75*H_CHT + T_CHTwall + .125 in]
Flex5_Origin := CHT1_Origin
Flex6_Origin := CHT2_Origin
Flex7_Origin := CHT4_Origin
Flex8_Origin := CHT3_Origin
# Lever
# Lever Arms
CdcLeverArm1 := BoxF([
    CdcLeverArm_Origin[0] + T_CdcLeverArm;
    CdcLeverArm_Origin[1] - L_CdcLeverArm - D_CdcLeverCylinder1/2;
    CdcLeverArm_Origin[2]
], [
    CdcLeverArm_Origin[0];
    CdcLeverArm_Origin[1] + L_CdcLeverArm + L_CdcLeverArmExtended;
    CdcLeverArm_Origin[2] + H_CdcLeverArm
], [0; 0; 0]*deg)
CdcLeverArm2 := BoxF([
    CdcLeverArm2_Origin[0] + T_CdcLeverArm;
    CdcLeverArm2_Origin[1] - L_CdcLeverArm - D_CdcLeverCylinder1/2;
    CdcLeverArm2_Origin[2]
], [
    CdcLeverArm2_Origin[0];
    CdcLeverArm2_Origin[1] + (L_CdcLeverArm + L_CdcLeverArmExtended);
    CdcLeverArm2_Origin[2] + H_CdcLeverArm
], [0; 0; 0]*deg)
CdcLeverArm_Script := stack(CdcLeverLayer, CdcLeverArm1, CdcLeverArm2, CdcLeverFrz)
# Connecting Cylinder
CdcLeverConnectingCylinder1 := CylinderSUBF([
    CdcLeverArm_Origin[0] + T_CdcLeverArm;
    (CdcLeverArm_Origin[1] - L_CdcLeverArm) - D_CdcLeverCylinder1/2;
    CdcLeverArm_Origin[2] + H_LeverArm/2
], D_CdcLeverCylinder1/2, L_CdcLeverCylinder, [0; 180]*deg, ["CdcLayer"])  # Top most cylinder. Connected to float. Thickest
CdcLeverConnectingCylinder4 := CylinderSUBF([
    CdcLeverArm_Origin[0] + T_CdcLeverArm;
    CdcLeverArm_Origin[1] + L_CdcLeverArm + L_CdcLeverArmExtended - D_CdcLeverCylinder4/2;
    CdcLeverArm_Origin[2] + H_LeverArm/2
], D_CdcLeverCylinder4/2, L_CdcLeverCylinder, [0; 180]*deg, ["CdcLayer"])  # Bottom most cylinder.
CdcLeverConnectingCylinder2 := CylinderSUBF([
    CdcLeverArm_Origin[0] + T_CdcLeverArm;
    CdcLeverArm_Origin[1] + L_CdcLeverPivottoCylinder2;
    CdcLeverArm_Origin[2] + H_LeverArm/2
], D_CdcLeverCylinder2/2, L_CdcLeverCylinder, [0; 180]*deg, ["CdcLayer"])
# Cylinder closest to the pivot point
CdcLeverConnectingCylinder3 := CylinderSUBF([
    CdcLeverArm_Origin[0] + T_CdcLeverArm;
    CdcLeverArm_Origin[1] + L_CdcLeverPivottoCylinder2 + L_CdcLeverCylinder2to3;
    CdcLeverArm_Origin[2] + H_LeverArm/2
], D_CdcLeverCylinder2/2, L_CdcLeverCylinder, [0; 180]*deg, ["CdcLayer"])
CdcLeverInnerBar1 := BoxF([
    CdcLeverPivotBox_Origin[0];
    CdcLeverPivotBox_Origin[1] - W_CdcLeverPivotBox;
    CdcLeverPivotBox_Origin[2]
], [
    CdcLeverPivotBox_Origin[0] - T_CdcLeverArm;
    CdcLeverPivotBox_Origin[1] + L_CdcLeverInnerBar;
    CdcLeverPivotBox_Origin[2] - H_CdcLeverArm
], [0; 0; 0]*deg)
CdcLeverInnerBar2 := BoxF([
    CdcLeverPivotBox_Origin[0] + L_CdcLeverPivotBox;
    CdcLeverPivotBox_Origin[1] - W_CdcLeverPivotBox;
    CdcLeverPivotBox_Origin[2]
], [
    CdcLeverPivotBox_Origin[0] + L_CdcLeverPivotBox + T_CdcLeverArm;
    CdcLeverPivotBox_Origin[1] + L_CdcLeverInnerBar;
    CdcLeverPivotBox_Origin[2] - H_CdcLeverArm
], [0; 0; 0]*deg)
CdcLeverConnectingCylinder_Script := stack(SelectCdcLever, CdcLeverConnectingCylinder1, CdcLeverInnerBar1, CdcLeverInnerBar2, CdcLeverConnectingCylinder2, CdcLeverConnectingCylinder3, CdcLeverConnectingCylinder4, CdcLeverFrz)
# Mounting Plate and Pivot Box
CdcLeverPivotBox := BoxF(CdcLeverPivotBox_Origin, [
    CdcLeverPivotBox_Origin[0] + L_CdcLeverPivotBox;
    CdcLeverPivotBox_Origin[1] - W_CdcLeverPivotBox;
    CdcLeverPivotBox_Origin[2] - H_CdcLeverPivotBox
], [0; 0; 0]*deg)
CdcLeverMountingPlate := BoxF(CdcLeverPivotBox_Origin, [
    CdcLeverPivotBox_Origin[0] + H_CdcLeverMountingPlate;
    CdcLeverPivotBox_Origin[1] + W_CdcLeverMountingPlate;
    CdcLeverPivotBox_Origin[2] - L_CdcLeverMountingPlate
], [0; 0; 0]*deg)
CdcLeverMounting := stack(CdcLeverMountingLayer, CdcLeverPivotBox, CdcLeverMountingPlate, CdcLeverMountingFrz)
# Float Cable
L_CdcFloatCable := (CdcLeverArm_Origin[2] - CdcFloat_Origin[2]) - T_EtFloat + L_CdcLeverVert + H_CdcLeverArm/2 = 0.2977 m
CdcFloatCable := CylinderF([CdcFloat_Origin[0]; CdcFloat_Origin[1]; CdcFloat_Origin[2] + T_EtFloat], D_CdcFloatCable, -L_CdcFloatCable, [0; -90]*deg)
CdcLeverFloatCable_Script := stack(SelectCdcLever, CdcFloatCable, CdcLeverFrz)
# Lever Drop Tubes/Tees
# Drop Tube Tees
CdcDropTubeTee := TeeF(CdcLeverDropTubeTee_Origin, [90; 0; 90 + AN_CdcLever]*deg, ND_DropTube, SDR_13.5)
CdcDropTube2Tee := TeeF(CdcLeverDropTube2Tee_Origin, [-90; 0; 90 + AN_CdcLever]*deg, ND_DropTube, SDR_13.5)
CdcLeverFittings_Script := stack(CdcLeverFittingsLayer, CdcDropTubeTee, CdcDropTube2Tee, CdcLeverFittingsFrz)
# DropPlumbing
CdcLeverDropTube1 := PipeF(CdcLeverDropTube_Origin, L_DropTube, [-AN_CdcLever; -90]*deg, ND_DropTube, SDR_13.5)
CdcLeverDropTube2 := PipeF(CdcLeverDropTube2_Origin, L_DropTube, [-AN_CdcLever; -90]*deg, ND_DropTube, SDR_13.5)
CdcLeverPlu_Script := stack(CdcLeverPluLayer, CdcLeverDropTube1, CdcLeverDropTube2, CdcLeverPluFrz)
# Lever Sliders
CdcLeverSliderOutsideBox := BoxF(CdcLeverSlider1_Origin, [
    CdcLeverSlider1_Origin[0] + T_CdcLeverSlider;
    CdcLeverSlider1_Origin[1] + L_CdcLeverSlider;
    CdcLeverSlider1_Origin[2] - H_CdcLeverSlider
], [0; 0; 0]*deg)
CdcLeverSliderOutside2Box := BoxF(CdcLeverSlider2_Origin, [
    CdcLeverSlider2_Origin[0] - T_CdcLeverSlider;
    CdcLeverSlider2_Origin[1] + L_CdcLeverSlider;
    CdcLeverSlider2_Origin[2] - H_CdcLeverSlider
], [0; 0; 0]*deg)
CdcLeverSliderMiddleTop2Box := BoxF(CdcLeverSliderMiddleTop2_Origin, [
    CdcLeverSliderMiddleTop2_Origin[0] - T_CdcLeverArm;
    CdcLeverSliderMiddleTop2_Origin[1] + L_CdcLeverSlider;
    CdcLeverSliderMiddleTop2_Origin[2] - T_CdcLeverSlider
], [0; 0; 0]*deg)
CdcLeverSliderMiddleTopBox := BoxF(CdcLeverSliderMiddleTop_Origin, [
    CdcLeverSliderMiddleTop_Origin[0] + T_CdcLeverArm;
    CdcLeverSliderMiddleTop_Origin[1] + L_CdcLeverSlider;
    CdcLeverSliderMiddleTop_Origin[2] - T_CdcLeverSlider
], [0; 0; 0]*deg)
CdcLeverSliderMiddleBot2Box := BoxF(CdcLeverSliderMiddleBot2_Origin, [
    CdcLeverSliderMiddleBot2_Origin[0] - T_CdcLeverArm;
    CdcLeverSliderMiddleBot2_Origin[1] + L_CdcLeverSlider;
    CdcLeverSliderMiddleBot2_Origin[2] - T_CdcLeverSlider
], [0; 0; 0]*deg)
CdcLeverSliderMiddleBotBox := BoxF(CdcLeverSliderMiddleBot_Origin, [
    CdcLeverSliderMiddleBot_Origin[0] + T_CdcLeverArm;
    CdcLeverSliderMiddleBot_Origin[1] + L_CdcLeverSlider;
    CdcLeverSliderMiddleBot_Origin[2] - T_CdcLeverSlider
], [0; 0; 0]*deg)
CdcLeverSliderInnerTop2Box := BoxF(CdcLeverSliderInnerTop2_Origin, [
    CdcLeverSliderInnerTop2_Origin[0] - T_CdcLeverSlider;
    CdcLeverSliderInnerTop2_Origin[1] + L_CdcLeverSlider;
    CdcLeverSliderInnerTop2_Origin[2] - 2*T_CdcLeverSlider
], [0; 0; 0]*deg)
CdcLeverSliderInnerTopBox := BoxF(CdcLeverSliderInnerTop_Origin, [
    CdcLeverSliderInnerTop_Origin[0] + T_CdcLeverSlider;
    CdcLeverSliderInnerTop_Origin[1] + L_CdcLeverSlider;
    CdcLeverSliderInnerTop_Origin[2] - 2*T_CdcLeverSlider
], [0; 0; 0]*deg)
CdcLeverSliderInnerBotBox := BoxF(CdcLeverSliderInnerBot_Origin, [
    CdcLeverSliderInnerBot_Origin[0] + T_CdcLeverSlider;
    CdcLeverSliderInnerBot_Origin[1] + L_CdcLeverSlider;
    CdcLeverSliderInnerBot_Origin[2] - 2*T_CdcLeverSlider
], [0; 0; 0]*deg)
CdcLeverSliderInnerBot2Box := BoxF(CdcLeverSliderInnerBot2_Origin, [
    CdcLeverSliderInnerBot2_Origin[0] - T_CdcLeverSlider;
    CdcLeverSliderInnerBot2_Origin[1] + L_CdcLeverSlider;
    CdcLeverSliderInnerBot2_Origin[2] - 2*T_CdcLeverSlider
], [0; 0; 0]*deg)
CdcLeverSlider_Script := stack(CdcLeverSliderLayer, CdcLeverSliderOutsideBox, CdcLeverSliderOutside2Box, CdcLeverSliderMiddleTopBox, CdcLeverSliderMiddleTop2Box, CdcLeverSliderMiddleBotBox, CdcLeverSliderMiddleBot2Box, CdcLeverSliderInnerTopBox, CdcLeverSliderInnerTop2Box, CdcLeverSliderInnerBotBox, CdcLeverSliderInnerBot2Box, Union_All, CdcLeverSliderFrz)
# Float
CdcFloat := CylinderF(CdcFloat_Origin, OR_Fitting(ND_EtFloat), T_CdcFloat, [0; 90]*deg)
CdcFloat_Script := stack(CdcFloatLayer, CdcFloat, CdcFloatFrz)
# Lever Rotation
Rotate3D_CdcLever := Rotate3DLast([CdcLeverArm_Origin[1]; CdcLeverArm_Origin[2]; CdcLeverArm_Origin[0]], "z", -AN_CdcLever*deg)
RotateCdcLever_Script := stack(ThawCdcLever, view("r"), Rotate3D_CdcLever, view("t"), CdcLeverFrz)
RotateCdcLeverSlider_Script := stack(ThawCdcLeverSlider, view("r"), Rotate3D_CdcLever, view("t"), CdcLeverSliderFrz)
RotateCdcLeverFittings_Script := stack(ThawCdcLeverFittings, view("r"), Rotate3D_CdcLever, view("t"), CdcLeverFittingsFrz)
RotateCdcLeverPlu_Script := stack(ThawCdcLeverPlu, view("r"), Rotate3D_CdcLever, view("t"), CdcLeverPluFrz)
CdcLever_Script := stack(CdcFloat_Script, CdcLeverArm_Script, CdcLeverConnectingCylinder_Script, RotateCdcLever_Script, CdcLeverSlider_Script, RotateCdcLeverSlider_Script, CdcLeverFittings_Script, RotateCdcLeverFittings_Script, CdcLeverPlu_Script, RotateCdcLeverPlu_Script, CdcLeverFloatCable_Script, CdcLeverMounting)
CdcLever_ScriptNoRotation := stack(CdcFloat_Script, CdcLeverArm_Script, CdcLeverConnectingCylinder_Script, CdcLeverSlider_Script, CdcLeverFittings_Script, CdcLeverPlu_Script)
LeverandET_Script := stack(AC_EntranceTank, CdcLever_Script)
# Manifold
ChlorElbowConnectorPipeBottom13
# Manifold Pipes
# ONLY USE 45 degree elbows for AUTOCAD 2015!!!!
DtoC45PipeConnect := PipeF(E45DtoC_Origin, ChlorElbowDtoC1_Origin[1] - E45DtoC_Origin[1] - ElbowRadius(ND_ChlorPipe), [-90; 0]*deg, ND_ChlorPipe, SDR_13.5)
DtoC45PipeBottom := PipeF(E45DtoC_Origin + [-ElbowRadius(ND_ChlorPipe)*(1 - sin(45 deg)); -ElbowRadius(ND_ChlorPipe)*sin(45 deg); 0 m], 2*(SocketDepth(ND_ChlorPipe) + E45pipe), [45; 0]*deg, ND_ChlorPipe, SDR_13.5)
DtoC45Pipe := PipeF(E45DtoC_Origin + [
    -2*ElbowRadius(ND_ChlorPipe)*(1 - sin(45 deg)) - 2*SocketDepth(ND_ChlorPipe)*sin(45);
    -2*ElbowRadius(ND_ChlorPipe)*sin(45 deg) - 2*SocketDepth(ND_ChlorPipe)*sin(45) - (2*SocketDepth(ND_ChlorPipe));
    0 m
], 2*SocketDepth(ND_ChlorPipe), [-90; 0]*deg, ND_ChlorPipe, SDR_13.5)
DtoC45PipeTop := PipeF(E45DtoC_Origin + [
    -(ElbowRadius(ND_ChlorPipe)*(1 - sin(45 deg)));
    -3*ElbowRadius(ND_ChlorPipe)*sin(45 deg) - 4*SocketDepth(ND_ChlorPipe)*sin(45) - 2*SocketDepth(ND_ChlorPipe);
    0 m
], 2*(SocketDepth(ND_ChlorPipe) + E45pipe), [-45; 0]*deg, ND_DeliveryPipe, SDR_13.5)
EndChlorPipe := E45DtoC_Origin[1] + (-4*ElbowRadius(ND_ChlorPipe)*sin(45 deg) - 4*SocketDepth(ND_ChlorPipe)*sin(45) - 2*SocketDepth(ND_ChlorPipe))
# CURRENTLY IN USE for Autocad 2013 design tool.
# Note that the origin point for the bridge remains the same.
ChlorElbowDtoC1_Origin[1] - E45DtoC_Origin[1] = 0.0535 m
DtoC45PipeConnect := PipeF(E45DtoC_Origin, ChlorElbowDtoC1_Origin[1] - E45DtoC_Origin[1] - ElbowRadius(ND_ChlorPipe), [-90; 0]*deg, ND_ChlorPipe, SDR_13.5)
SocketDepth(ND_ChlorPipe) = 0.017 m
DtoC45PipeBottom := PipeF(E45DtoC_Origin + [-ElbowRadius(ND_ChlorPipe); -ElbowRadius(ND_ChlorPipe); 0 m], 2*SocketDepth(ND_ChlorPipe), [0; 0]*deg, ND_ChlorPipe, SDR_13.5)
ElbowRadius(ND_ChlorPipe) = 0.01475 m
DtoC45Pipe := PipeF(E45DtoC_Origin + [
    -2*ElbowRadius(ND_ChlorPipe) - 2*SocketDepth(ND_ChlorPipe);
    -2*ElbowRadius(ND_ChlorPipe) - 2*SocketDepth(ND_ChlorPipe);
    0 m
], 2*SocketDepth(ND_ChlorPipe), [-90; 0]*deg, ND_ChlorPipe, SDR_13.5)
DtoC45PipeTop := PipeF(E45DtoC_Origin + [-ElbowRadius(ND_ChlorPipe); -3*ElbowRadius(ND_ChlorPipe) - 2*SocketDepth(ND_ChlorPipe); 0 m], 2*SocketDepth(ND_ChlorPipe), [0; 0]*deg, ND_DeliveryPipe, SDR_13.5)
EndChlorPipe := E45DtoC_Origin[1] + (-4*ElbowRadius(ND_ChlorPipe)) - 2*SocketDepth(ND_ChlorPipe)
DtoCElbowbridge_pipes := stack(DtoC45PipeConnect, DtoC45PipeBottom, DtoC45Pipe, DtoC45PipeTop)
# Coagulant Connector and Delivery Pipes
CoagConnectorPipe := PipeF(CoagDosingTube_Origin + [
    -L_PVCBallValve - ShortTeeLength(ND_DeliveryPipe) - SocketDepth(ND_DeliveryPipe);
    0 m;
    .5*TeeLength(ND_DeliveryPipe)
], 2*SocketDepth(ND_DeliveryPipe), [0; 90]*deg, ND_DeliveryPipe, SDR_13.5)
ArrayCoagConnectorPipe := ArrayLast(N_CoagTubes, 1, B_DosingTubes)  # Minus 1????? It is minus one for the CDC dosing tubes. NOT CLEAR. mrf222
MirrorCoagConnectorPipe := Mirror3dAll("yz", [
    CoagDosingTube_Origin[0] + .5*L_CoagTube;
    CoagDosingTube_Origin[1];
    CoagDosingTube_Origin[2] + 1/4*H_Et + ShortTeeLength(ND_DeliveryPipe) + .5*ND_DeliveryPipe
], "n")
L_CoagDeliveryConnectorPipeLong = 0.092418 m
CoagDeliveryPipe := PipeF(CoagDeliveryPipe_Origin, L_CoagDeliveryPipe + SocketDepth(ND_DeliveryPipe), [0; 0]*deg, ND_DeliveryPipe, SDR_13.5)
CoagDeliveryConnectorPipeLong := PipeF(CoagDosingTube_Origin + [
    L_PVCBallValve + ShortTeeLength(ND_DeliveryPipe) + SocketDepth(ND_DeliveryPipe) + L_CoagTube;
    0 m;
    -.5*TeeLength(ND_DeliveryPipe)
], L_CoagDeliveryConnectorPipeLong, [0; -90]*deg, ND_DeliveryPipe, SDR_13.5)
CoagAirReleaseConnectorBottomRightPipe := PipeF(CoagDosingTube_Origin + [
    -L_PVCBallValve - ShortTeeLength(ND_DeliveryPipe) - SocketDepth(ND_DeliveryPipe);
    (ElbowRadius(ND_DeliveryPipe)*(sin(45 deg)/sin(67.5 deg)))*cos(67.5 deg) + 2*(SocketDepth(ND_DeliveryPipe)*cos(45 deg));
    ((N_CoagTubes - 1)*(TeeLength(ND_DeliveryPipe) + 2*SocketDepth(ND_DeliveryPipe)) + .5*TeeLength(ND_DeliveryPipe) + 2*SocketDepth(ND_DeliveryPipe)) + (ElbowRadius(ND_DeliveryPipe)*(sin(45 deg)/sin(67.5 deg)))*sin(67.5 deg) + 2*(SocketDepth(ND_DeliveryPipe)*cos(45 deg))
], 2*SocketDepth(ND_DeliveryPipe), [45; -90]*deg, ND_DeliveryPipe, SDR_13.5)
CoagAirReleaseConnectorBottomLeftPipe := PipeF(CoagDosingTube_Origin + [
    L_CoagTube + L_PVCBallValve + ShortTeeLength(ND_DeliveryPipe) + SocketDepth(ND_DeliveryPipe);
    (ElbowRadius(ND_DeliveryPipe)*(sin(45 deg)/sin(67.5 deg)))*cos(67.5 deg) + 2*(SocketDepth(ND_DeliveryPipe)*cos(45 deg));
    ((N_CoagTubes - 1)*(TeeLength(ND_DeliveryPipe) + 2*SocketDepth(ND_DeliveryPipe)) + .5*TeeLength(ND_DeliveryPipe) + 2*SocketDepth(ND_DeliveryPipe)) + (ElbowRadius(ND_DeliveryPipe)*(sin(45 deg)/sin(67.5 deg)))*sin(67.5 deg) + 2*(SocketDepth(ND_DeliveryPipe)*cos(45 deg))
], 2*SocketDepth(ND_DeliveryPipe), [45; -90]*deg, ND_DeliveryPipe, SDR_13.5)
# Currently in use: Autocad 2013
CoagAirReleaseConnectorBottomRightPipe := PipeF(CoagDosingTube_Origin + [
    -L_PVCBallValve - ShortTeeLength(ND_DeliveryPipe) - SocketDepth(ND_DeliveryPipe);
    ElbowRadius(ND_DeliveryPipe) + 2*SocketDepth(ND_DeliveryPipe);
    ((N_CoagTubes - 1)*(TeeLength(ND_DeliveryPipe) + 2*SocketDepth(ND_DeliveryPipe)) + .5*TeeLength(ND_DeliveryPipe) + 2*SocketDepth(ND_DeliveryPipe)) + ElbowRadius(ND_DeliveryPipe)
], 2*SocketDepth(ND_DeliveryPipe), [90; 0]*deg, ND_DeliveryPipe, SDR_13.5)
CoagAirReleaseConnectorBottomLeftPipe := PipeF(CoagDosingTube_Origin + [
    L_CoagTube + L_PVCBallValve + ShortTeeLength(ND_DeliveryPipe) + SocketDepth(ND_DeliveryPipe);
    ElbowRadius(ND_DeliveryPipe) + 2*SocketDepth(ND_DeliveryPipe);
    ((N_CoagTubes - 1)*(TeeLength(ND_DeliveryPipe) + 2*SocketDepth(ND_DeliveryPipe)) + .5*TeeLength(ND_DeliveryPipe) + 2*SocketDepth(ND_DeliveryPipe)) + ElbowRadius(ND_DeliveryPipe)
], 2*SocketDepth(ND_DeliveryPipe), [90; 0]*deg, ND_DeliveryPipe, SDR_13.5)
L_CoagAirReleaseConnectorMiddleRightPipe := (N_ChlorTubes - 1)*(2*SocketDepth(ND_DeliveryPipe) + TeeLength(ND_DeliveryPipe)) + TeeLength(ND_DeliveryPipe)
L_CoagAirReleaseConnectorMiddleRightPipe := (N_ChlorTubes - 1)*(2*SocketDepth(ND_DeliveryPipe) + TeeLength(ND_DeliveryPipe)) + TeeLength(ND_DeliveryPipe) = 0.1565 m
CoagAirReleaseConnectorMiddleRightPipe := PipeF(CoagDosingTube_Origin + [
    -L_PVCBallValve - ShortTeeLength(ND_DeliveryPipe) - SocketDepth(ND_DeliveryPipe);
    2*(ElbowRadius(ND_DeliveryPipe)*(sin(45 deg)/sin(67.5 deg)))*cos(67.5 deg) + 2*(SocketDepth(ND_DeliveryPipe)*cos(45 deg));
    ((N_CoagTubes - 1)*(TeeLength(ND_DeliveryPipe) + 2*SocketDepth(ND_DeliveryPipe)) + .5*TeeLength(ND_DeliveryPipe) + 2*SocketDepth(ND_DeliveryPipe)) + 2*(ElbowRadius(ND_DeliveryPipe)*(sin(45 deg)/sin(67.5 deg)))*sin(67.5 deg) + 2*(SocketDepth(ND_DeliveryPipe)*cos(45 deg))
], L_CoagAirReleaseConnectorMiddleRightPipe, [0; 90]*deg, ND_DeliveryPipe, SDR_13.5)
CoagAirReleaseConnectorMiddleLeftPipe := PipeF(CoagDosingTube_Origin + [
    L_CoagTube + L_PVCBallValve + ShortTeeLength(ND_DeliveryPipe) + SocketDepth(ND_DeliveryPipe);
    2*(ElbowRadius(ND_DeliveryPipe)*(sin(45 deg)/sin(67.5 deg)))*cos(67.5 deg) + 2*(SocketDepth(ND_DeliveryPipe)*cos(45 deg));
    ((N_CoagTubes - 1)*(TeeLength(ND_DeliveryPipe) + 2*SocketDepth(ND_DeliveryPipe)) + .5*TeeLength(ND_DeliveryPipe) + 2*SocketDepth(ND_DeliveryPipe)) + 2*(ElbowRadius(ND_DeliveryPipe)*(sin(45 deg)/sin(67.5 deg)))*sin(67.5 deg) + 2*(SocketDepth(ND_DeliveryPipe)*cos(45 deg))
], L_CoagAirReleaseConnectorMiddleRightPipe, [0; 90]*deg, ND_DeliveryPipe, SDR_13.5)
# Currently in use: Autocad 2013
CoagAirReleaseConnectorMiddleRightPipe := PipeF(CoagDosingTube_Origin + [
    -L_PVCBallValve - ShortTeeLength(ND_DeliveryPipe) - SocketDepth(ND_DeliveryPipe);
    2*ElbowRadius(ND_DeliveryPipe) + 2*SocketDepth(ND_DeliveryPipe);
    ((N_CoagTubes - 1)*(TeeLength(ND_DeliveryPipe) + 2*SocketDepth(ND_DeliveryPipe)) + .5*TeeLength(ND_DeliveryPipe) + 2*SocketDepth(ND_DeliveryPipe)) + 2*ElbowRadius(ND_DeliveryPipe)
], L_CoagAirReleaseConnectorMiddleRightPipe + 2*SocketDepth(ND_DeliveryPipe), [0; 90]*deg, ND_DeliveryPipe, SDR_13.5)
CoagAirReleaseConnectorMiddleLeftPipe := PipeF(CoagDosingTube_Origin + [
    L_CoagTube + L_PVCBallValve + ShortTeeLength(ND_DeliveryPipe) + SocketDepth(ND_DeliveryPipe);
    2*ElbowRadius(ND_DeliveryPipe) + 2*SocketDepth(ND_DeliveryPipe);
    ((N_CoagTubes - 1)*(TeeLength(ND_DeliveryPipe) + 2*SocketDepth(ND_DeliveryPipe)) + .5*TeeLength(ND_DeliveryPipe) + 2*SocketDepth(ND_DeliveryPipe)) + 2*ElbowRadius(ND_DeliveryPipe)
], L_CoagAirReleaseConnectorMiddleRightPipe + 2*SocketDepth(ND_DeliveryPipe), [0; 90]*deg, ND_DeliveryPipe, SDR_13.5)
CoagAirReleaseConnectorTopRightPipe := PipeF(CoagDosingTube_Origin + [
    -L_PVCBallValve - ShortTeeLength(ND_DeliveryPipe) - SocketDepth(ND_DeliveryPipe);
    (ElbowRadius(ND_DeliveryPipe)*(sin(45 deg)/sin(67.5 deg)))*cos(67.5 deg) + 2*(SocketDepth(ND_DeliveryPipe)*cos(45 deg));
    ((N_CoagTubes - 1)*(TeeLength(ND_DeliveryPipe) + 2*SocketDepth(ND_DeliveryPipe)) + .5*TeeLength(ND_DeliveryPipe) + 2*SocketDepth(ND_DeliveryPipe)) + 3*(ElbowRadius(ND_DeliveryPipe)*(sin(45 deg)/sin(67.5 deg)))*sin(67.5 deg) + 2*(SocketDepth(ND_DeliveryPipe)*cos(45 deg)) + L_CoagAirReleaseConnectorMiddleRightPipe
], 2*SocketDepth(ND_DeliveryPipe), [45; 90]*deg, ND_DeliveryPipe, SDR_13.5)
CoagAirReleaseConnectorTopLeftPipe := PipeF(CoagDosingTube_Origin + [
    L_CoagTube + L_PVCBallValve + ShortTeeLength(ND_DeliveryPipe) + SocketDepth(ND_DeliveryPipe);
    (ElbowRadius(ND_DeliveryPipe)*(sin(45 deg)/sin(67.5 deg)))*cos(67.5 deg) + 2*(SocketDepth(ND_DeliveryPipe)*cos(45 deg));
    ((N_CoagTubes - 1)*(TeeLength(ND_DeliveryPipe) + 2*SocketDepth(ND_DeliveryPipe)) + .5*TeeLength(ND_DeliveryPipe) + 2*SocketDepth(ND_DeliveryPipe)) + 3*(ElbowRadius(ND_DeliveryPipe)*(sin(45 deg)/sin(67.5 deg)))*sin(67.5 deg) + 2*(SocketDepth(ND_DeliveryPipe)*cos(45 deg)) + L_CoagAirReleaseConnectorMiddleRightPipe
], 2*SocketDepth(ND_DeliveryPipe), [45; 90]*deg, ND_DeliveryPipe, SDR_13.5)
# Currently in use: Autocad 2013
CoagAirReleaseConnectorTopRightPipe := PipeF(CoagDosingTube_Origin + [
    -L_PVCBallValve - ShortTeeLength(ND_DeliveryPipe) - SocketDepth(ND_DeliveryPipe);
    ElbowRadius(ND_DeliveryPipe) + 2*SocketDepth(ND_DeliveryPipe);
    ((N_CoagTubes - 1)*(TeeLength(ND_DeliveryPipe) + 2*SocketDepth(ND_DeliveryPipe)) + .5*TeeLength(ND_DeliveryPipe) + 2*SocketDepth(ND_DeliveryPipe)) + 3*ElbowRadius(ND_DeliveryPipe) + 2*SocketDepth(ND_DeliveryPipe) + L_CoagAirReleaseConnectorMiddleRightPipe
], 2*SocketDepth(ND_DeliveryPipe), [90; 0]*deg, ND_DeliveryPipe, SDR_13.5)
CoagAirReleaseConnectorTopLeftPipe := PipeF(CoagDosingTube_Origin + [
    L_CoagTube + L_PVCBallValve + ShortTeeLength(ND_DeliveryPipe) + SocketDepth(ND_DeliveryPipe);
    ElbowRadius(ND_DeliveryPipe) + 2*SocketDepth(ND_DeliveryPipe);
    ((N_CoagTubes - 1)*(TeeLength(ND_DeliveryPipe) + 2*SocketDepth(ND_DeliveryPipe)) + .5*TeeLength(ND_DeliveryPipe) + 2*SocketDepth(ND_DeliveryPipe)) + 3*ElbowRadius(ND_DeliveryPipe) + 2*SocketDepth(ND_DeliveryPipe) + L_CoagAirReleaseConnectorMiddleRightPipe
], 2*SocketDepth(ND_DeliveryPipe), [90; 0]*deg, ND_DeliveryPipe, SDR_13.5)
CoagAirReleaseRightPipe := PipeF(CoagDosingTube_Origin + [
    -L_PVCBallValve - ShortTeeLength(ND_DeliveryPipe) - SocketDepth(ND_DeliveryPipe);
    0 m;
    ((N_CoagTubes - 1)*(TeeLength(ND_DeliveryPipe) + 2*SocketDepth(ND_DeliveryPipe)) + .5*TeeLength(ND_DeliveryPipe) + 2*SocketDepth(ND_DeliveryPipe)) + 4*(ElbowRadius(ND_DeliveryPipe)*(sin(45 deg)/sin(67.5 deg)))*sin(67.5 deg) + 4*(SocketDepth(ND_DeliveryPipe)*cos(45 deg)) + L_CoagAirReleaseConnectorMiddleRightPipe
], L_ChlorAirReleasePipe - ((ElbowRadius(ND_DeliveryPipe)*(sin(45 deg)/sin(67.5 deg)))*sin(67.5 deg) + 2*(SocketDepth(ND_DeliveryPipe)*cos(45 deg))), [0; 90]*deg, ND_DeliveryPipe, SDR_13.5)
CoagAirReleaseLeftPipe := PipeF(CoagDosingTube_Origin + [
    L_CoagTube + L_PVCBallValve + ShortTeeLength(ND_DeliveryPipe) + SocketDepth(ND_DeliveryPipe);
    0 m;
    ((N_CoagTubes - 1)*(TeeLength(ND_DeliveryPipe) + 2*SocketDepth(ND_DeliveryPipe)) + .5*TeeLength(ND_DeliveryPipe) + 2*SocketDepth(ND_DeliveryPipe)) + 4*(ElbowRadius(ND_DeliveryPipe)*(sin(45 deg)/sin(67.5 deg)))*sin(67.5 deg) + 4*(SocketDepth(ND_DeliveryPipe)*cos(45 deg)) + L_CoagAirReleaseConnectorMiddleRightPipe
], L_ChlorAirReleasePipe - ((ElbowRadius(ND_DeliveryPipe)*(sin(45 deg)/sin(67.5 deg)))*sin(67.5 deg) + 2*(SocketDepth(ND_DeliveryPipe)*cos(45 deg))), [0; 90]*deg, ND_DeliveryPipe, SDR_13.5)
# Currently in use: Autocad 2013
CoagAirReleaseRightPipe := PipeF(CoagDosingTube_Origin + [
    -L_PVCBallValve - ShortTeeLength(ND_DeliveryPipe) - SocketDepth(ND_DeliveryPipe);
    0 m;
    ((N_CoagTubes - 1)*(TeeLength(ND_DeliveryPipe) + 2*SocketDepth(ND_DeliveryPipe)) + .5*TeeLength(ND_DeliveryPipe) + 2*SocketDepth(ND_DeliveryPipe)) + 4*ElbowRadius(ND_DeliveryPipe) + L_CoagAirReleaseConnectorMiddleRightPipe + (2*SocketDepth(ND_DeliveryPipe))
], L_ChlorAirReleasePipe - 3*ElbowRadius(ND_DeliveryPipe), [0; 90]*deg, ND_DeliveryPipe, SDR_13.5)
CoagAirReleaseLeftPipe := PipeF(CoagDosingTube_Origin + [
    L_CoagTube + L_PVCBallValve + ShortTeeLength(ND_DeliveryPipe) + SocketDepth(ND_DeliveryPipe);
    0 m;
    ((N_CoagTubes - 1)*(TeeLength(ND_DeliveryPipe) + 2*SocketDepth(ND_DeliveryPipe)) + .5*TeeLength(ND_DeliveryPipe) + 2*SocketDepth(ND_DeliveryPipe)) + 4*ElbowRadius(ND_DeliveryPipe) + L_CoagAirReleaseConnectorMiddleRightPipe + (2*SocketDepth(ND_DeliveryPipe))
], L_ChlorAirReleasePipe - 3*ElbowRadius(ND_DeliveryPipe), [0; 90]*deg, ND_DeliveryPipe, SDR_13.5)
# Chlorine Connector and Delivery Pipes
# connects tees closest to the
# ET
ElbowRadius(ND_DeliveryPipe) + CapHeight(ND_DeliveryPipe) = 0.0409438 m
ChlorConnectorPipe := PipeF(ChlorDosingTube_Origin + [
    -L_PVCBallValve - ShortTeeLength(ND_DeliveryPipe) - SocketDepth(ND_DeliveryPipe);
    0 m;
    .5*TeeLength(ND_DeliveryPipe)
], 2*SocketDepth(ND_DeliveryPipe), [0; 90]*deg, ND_DeliveryPipe, SDR_13.5)
ArrayChlorConnectorPipe := ArrayLast(N_ChlorTubes - 1, 1, B_DosingTubes)
MirrorChlorConnectorPipe := Mirror3dAll("yz", [
    ChlorDosingTube_Origin[0] + .5*L_ChlorTube;
    ChlorDosingTube_Origin[1];
    ChlorDosingTube_Origin[2] + 1/4*H_Et + ShortTeeLength(ND_DeliveryPipe) + .5*ND_DeliveryPipe
], "n")
L_ChlorDeliveryConnectorPipeLong :=
    2*SocketDepth(ND_DeliveryPipe) if N_CoagTubes + N_ChlorTubes ≤ N_TubesTriggerStack
    ChlorDosingTube_Origin[2] - ChlorDeliveryPipe_Origin[2] - .5*TeeLength(ND_DeliveryPipe) - ElbowRadius(ND_DeliveryPipe) if L_ChlorDeliveryPipe > L_CoagDeliveryPipe + 2*(ElbowRadius(ND_DeliveryPipe) + SocketDepth(ND_DeliveryPipe))
    max(ChlorDosingTube_Origin[2] - ChlorDeliveryPipe_Origin[2] - .5*TeeLength(ND_DeliveryPipe) - ElbowRadius(ND_DeliveryPipe) - (2*sin(45 deg)*(2*ElbowRadius(ND_DeliveryPipe) + 2*SocketDepth(ND_DeliveryPipe)) + (N_ChlorTubes + 1)*B_DosingTubes + sin(45 deg)*(1 - tan(22.5 deg))*ElbowRadius(ND_DeliveryPipe) + SocketDepth(ND_DeliveryPipe)), 2*SocketDepth(ND_DeliveryPipe)) otherwise
    = 0.404254 m
ChlorDeliveryConnectorPipeLong := PipeF(ChlorDosingTube_Origin + [
    L_PVCBallValve + ShortTeeLength(ND_DeliveryPipe) + SocketDepth(ND_DeliveryPipe) + L_ChlorTube;
    0 m;
    -.5*TeeLength(ND_DeliveryPipe)
], -L_ChlorDeliveryConnectorPipeLong, [0; 90]*deg, ND_DeliveryPipe, SDR_13.5)
ChlorDosingTube_Origin + [
    L_PVCBallValve + ShortTeeLength(ND_DeliveryPipe) + SocketDepth(ND_DeliveryPipe) + L_ChlorTube;
    0 m;
    -.5*TeeLength(ND_DeliveryPipe) - L_ChlorDeliveryConnectorPipeLong
] = [-2.48139; 6.25508; 1.43363] m
L_ChlorDeliveryConnectorPipeLong = 0.404254 m
ChlorDeliveryPipe := PipeF(ChlorDeliveryPipe_Origin, L_ChlorDeliveryPipe + SocketDepth(ND_ChlorPipe), [0; 0]*deg, ND_DeliveryPipe, SDR_13.5)
ChlorAirReleaseRightPipe := PipeF(ChlorDosingTube_Origin + [
    -L_PVCBallValve - ShortTeeLength(ND_DeliveryPipe) - SocketDepth(ND_DeliveryPipe);
    0 m;
    (N_ChlorTubes - 1)*(TeeLength(ND_DeliveryPipe) + 2*SocketDepth(ND_DeliveryPipe)) + .5*TeeLength(ND_DeliveryPipe)
], L_ChlorAirReleasePipe, [0; 90]*deg, ND_DeliveryPipe, SDR_13.5)
ChlorAirReleaseLeftPipe := PipeF(ChlorDosingTube_Origin + [
    L_ChlorTube + L_PVCBallValve + ShortTeeLength(ND_DeliveryPipe) + SocketDepth(ND_DeliveryPipe);
    0 m;
    (N_ChlorTubes - 1)*(TeeLength(ND_DeliveryPipe) + 2*SocketDepth(ND_DeliveryPipe)) + .5*TeeLength(ND_DeliveryPipe)
], L_ChlorAirReleasePipe, [0; 90]*deg, ND_DeliveryPipe, SDR_13.5)
# Pipes connecting the dosing tubes to the CHTs
DtoCPipe1 := PipeF(DtoCPipe1_Origin, CoagDeliveryPipe_Origin[0] - DtoCPipe1_Origin[0] - L_CoagDeliveryPipe - CouplingLength(ND_DeliveryPipe) + SocketDepth(ND_DeliveryPipe), [180; 0]*deg, ND_DeliveryPipe, SDR_13.5)
DtoCPipe2 := PipeF(DtoCPipe2_Origin, ChlorDeliveryPipe_Origin[0] - DtoCPipe2_Origin[0] - L_ChlorDeliveryPipe - CouplingLength(ND_DeliveryPipe) + SocketDepth(ND_DeliveryPipe), [180; 0]*deg, ND_DeliveryPipe, SDR_13.5)
DtoCPipe3 := PipeF(DtoCPipe3_Origin, DtoCPipe1_Origin[1] - DtoCPipe3_Origin[1] - ElbowRadius(ND_DeliveryPipe), [-90; 0]*deg, ND_DeliveryPipe, SDR_13.5)
DtoCPipe4 := PipeF(DtoCPipe4_Origin, EndChlorPipe - DtoCPipe4_Origin[1], [-90; 0]*deg, ND_DeliveryPipe, SDR_13.5)
DtoCPipe5 := PipeF(DtoCPipe5_Origin, DtoCPipe3_Origin[2] - DtoCPipe5_Origin[2] - ElbowRadius(ND_ChlorPipe), [0; 90]*deg, ND_DeliveryPipe, SDR_13.5)
DtoCPipe6 := PipeF(DtoCPipe6_Origin, DtoCPipe4_Origin[2] - DtoCPipe6_Origin[2] - ElbowRadius(ND_CoagPipe), [0; 90]*deg, ND_DeliveryPipe, SDR_13.5)
DtoCPipe7 := PipeF(DtoCPipe7_Origin, DtoCPipe5_Origin[0] - DtoCPipe7_Origin[0] - ElbowRadius(ND_DeliveryPipe), [180; 0]*deg, ND_DeliveryPipe, SDR_13.5)
DtoCPipe8 := PipeF(DtoCPipe8_Origin, DtoCPipe6_Origin[0] - DtoCPipe8_Origin[0] - ElbowRadius(ND_DeliveryPipe), [180; 0]*deg, ND_DeliveryPipe, SDR_13.5)
DtoCPipe9 := PipeF(DtoCPipe9_Origin, CoagTeeDtoC_Origin[2] - DtoCPipe9_Origin[2] - ShortTeeLength(ND_DeliveryPipe), [0; 90]*deg, ND_DeliveryPipe, SDR_13.5)
DtoCPipe10 := PipeF(DtoCPipe10_Origin, ChlorTeeDtoC_Origin[2] - DtoCPipe10_Origin[2] - ShortTeeLength(ND_DeliveryPipe), [0; 90]*deg, ND_DeliveryPipe, SDR_13.5)
DtoCPipe11 := PipeF(DtoCPipe11_Origin, CoagElbowDtoC5_Origin[1] - DtoCPipe11_Origin[1] - ElbowRadius(ND_DeliveryPipe), [-90; 0]*deg, ND_DeliveryPipe, SDR_13.5)
DtoCPipe12 := PipeF(DtoCPipe12_Origin, DtoCPipe12_Origin[1] - ChlorElbowDtoC5_Origin[1] - ElbowRadius(ND_DeliveryPipe), [90; 0]*deg, ND_DeliveryPipe, SDR_13.5)
DtoCPipe13 := PipeF(DtoCPipe13_Origin, DtoCPipe13_Origin[2] - CoagElbowDtoC5_Origin[2], [0; 90]*deg, ND_DeliveryPipe, SDR_13.5)
DtoCPipe14 := PipeF(DtoCPipe14_Origin, DtoCPipe14_Origin[2] - ChlorElbowDtoC5_Origin[2], [0; 90]*deg, ND_DeliveryPipe, SDR_13.5)
DtoCPipe15 := PipeF(DtoCPipe15_Origin, DtoCPipe15_Origin[2] - CoagElbowDtoC5_Origin[2], [0; 90]*deg, ND_DeliveryPipe, SDR_13.5)
DtoCPipe16 := PipeF(DtoCPipe16_Origin, DtoCPipe16_Origin[2] - ChlorElbowDtoC5_Origin[2], [0; 90]*deg, ND_DeliveryPipe, SDR_13.5)
DtoCPipes := stack(DtoCPipe1, DtoCPipe2, DtoCPipe3, DtoCPipe4, DtoCPipe5, DtoCPipe6, DtoCPipe7, DtoCPipe8, DtoCPipe9, DtoCPipe10, DtoCPipe11, DtoCPipe12, DtoCPipe13, DtoCPipe14, DtoCPipe15, DtoCPipe16, DtoCElbowbridge_pipes)
# Manifold Fittings | changed by mrf222 Spring 2016
# Only for AutoCad 2015
E45DtoC1 := Elbow45F(E45DtoC_Origin + [-ElbowRadius(ND_ChlorPipe)*(1 - sin(45 deg)); -ElbowRadius(ND_ChlorPipe)*sin(45 deg); 0 m], [-45; 0; 0]*deg, ND_ChlorPipe, SDR_13.5)
E45DtoC2 := Elbow45F(E45DtoC_Origin + [
    -ElbowRadius(ND_ChlorPipe)*(1 - sin(45 deg)) - 2*SocketDepth(ND_ChlorPipe)*sin(45);
    -ElbowRadius(ND_ChlorPipe)*sin(45 deg) - 2*SocketDepth(ND_ChlorPipe)*sin(45);
    0 m
], [135; 0; 0]*deg, ND_ChlorPipe, SDR_13.5)
E45DtoC3 := Elbow45F(E45DtoC_Origin + [
    -2*ElbowRadius(ND_ChlorPipe)*(1 - sin(45 deg)) - 2*SocketDepth(ND_ChlorPipe)*sin(45);
    -2*ElbowRadius(ND_ChlorPipe)*sin(45 deg) - 2*SocketDepth(ND_ChlorPipe)*sin(45) - 2*SocketDepth(ND_ChlorPipe);
    0 m
], [180; 0; 0]*deg, ND_ChlorPipe, SDR_13.5)
E45DtoC4 := Elbow45F(E45DtoC_Origin + [
    0 m;
    -4*ElbowRadius(ND_ChlorPipe)*sin(45 deg) - 4*SocketDepth(ND_ChlorPipe)*sin(45) - 2*SocketDepth(ND_ChlorPipe);
    0 m
], [0; 0; 0]*deg, ND_ChlorPipe, SDR_13.5)
# Currently in use: AutoCad 2013
E45DtoC1 := ElbowF(E45DtoC_Origin + [-ElbowRadius(ND_ChlorPipe); -ElbowRadius(ND_ChlorPipe); 0 m], [-90; 0; 0]*deg, ND_ChlorPipe, SDR_13.5)
E45DtoC2 := ElbowF(E45DtoC_Origin + [-ElbowRadius(ND_ChlorPipe) - 2*SocketDepth(ND_ChlorPipe); -ElbowRadius(ND_ChlorPipe); 0 m], [90; 0; 0]*deg, ND_ChlorPipe, SDR_13.5)
E45DtoC3 := ElbowF(E45DtoC_Origin + [
    -2*ElbowRadius(ND_ChlorPipe) - 2*SocketDepth(ND_ChlorPipe);
    -2*ElbowRadius(ND_ChlorPipe) - 2*SocketDepth(ND_ChlorPipe);
    0 m
], [180; 0; 0]*deg, ND_ChlorPipe, SDR_13.5)
E45DtoC4 := ElbowF(E45DtoC_Origin + [0 m; -4*ElbowRadius(ND_ChlorPipe) - 2*SocketDepth(ND_ChlorPipe); 0 m], [0; 0; 0]*deg, ND_ChlorPipe, SDR_13.5)
DtoCElbowbridge_elbows := stack(E45DtoC1, E45DtoC2, E45DtoC3, E45DtoC4)
# Coag and Chlor Elbows
CouplingCoagCHT := CouplingF(CoagDeliveryPipe_Origin + [-L_CoagDeliveryPipe - CouplingLength(ND_DeliveryPipe) + SocketDepth(ND_DeliveryPipe); 0 m; 0 m], [180; 0; 0]*deg, ND_DeliveryPipe, SDR_13.5)
CouplingChlorCHT := CouplingF(ChlorDeliveryPipe_Origin + [-L_ChlorDeliveryPipe - CouplingLength(ND_DeliveryPipe) + SocketDepth(ND_DeliveryPipe); 0 m; 0 m], [180; 0; 0]*deg, ND_DeliveryPipe, SDR_13.5)
# Connections to the constant head tanks:
CoagElbowCtoD1 := ElbowF(CoagElbowDtoC1_Origin, [90; 0; 0]*deg, ND_DeliveryPipe, SDR_13.5)
ChlorElbowCtoD1 := ElbowF(ChlorElbowDtoC1_Origin, [90; 0; 0]*deg, ND_DeliveryPipe, SDR_13.5)
CoagElbowCtoD2_Origin := ElbowF(CoagElbowDtoC2_Origin, [90; -90; 180]*deg, ND_DeliveryPipe, SDR_13.5)
ChlorElbowCtoD2_Origin := ElbowF(ChlorElbowDtoC2_Origin, [90; -90; 180]*deg, ND_DeliveryPipe, SDR_13.5)
CoagElbowCtoD3_Origin := ElbowF(CoagElbowDtoC3_Origin, [0; 0; -90]*deg, ND_DeliveryPipe, SDR_13.5)
ChlorElbowCtoD3_Origin := ElbowF(ChlorElbowDtoC3_Origin, [0; 0; -90]*deg, ND_DeliveryPipe, SDR_13.5)
CoagElbowCtoD4_Origin := ElbowF(CoagElbowDtoC4_Origin, [0; 180; -90]*deg, ND_DeliveryPipe, SDR_13.5)
ChlorElbowCtoD4_Origin := ElbowF(ChlorElbowDtoC4_Origin, [0; 180; -90]*deg, ND_DeliveryPipe, SDR_13.5)
CoagTeeCtoD_Origin := TeeF(CoagTeeDtoC_Origin, [0; -90; 0]*deg, ND_DeliveryPipe, SDR_13.5)
ChlorTeeCtoD_Origin := TeeF(ChlorTeeDtoC_Origin, [180; -90; 0]*deg, ND_DeliveryPipe, SDR_13.5)
CoagElbowCtoD5_Origin := ElbowF(CoagElbowDtoC5_Origin, [90; -90; 0]*deg, ND_DeliveryPipe, SDR_13.5)
ChlorElbowCtoD5_Origin := ElbowF(ChlorElbowDtoC5_Origin, [90; 90; 180]*deg, ND_DeliveryPipe, SDR_13.5)
DtoCConnectionScript_Fitting := stack(CoagTeeCtoD_Origin, ChlorTeeCtoD_Origin, CoagElbowCtoD1, ChlorElbowCtoD1, CoagElbowCtoD2_Origin, CoagElbowCtoD3_Origin, CoagElbowCtoD4_Origin, CoagElbowCtoD5_Origin, ChlorElbowCtoD2_Origin, ChlorElbowCtoD3_Origin, ChlorElbowCtoD4_Origin, ChlorElbowCtoD5_Origin)
# Valves to connect to the flexible tubing
CoagDtoClValve1 := insertdwg("https://confluence.cornell.edu/download/attachments/173604905/BallValve.dwg", CtoDValve1, 1/250, 1/250, 0 deg)
RotateDtoCValve1 := Rotate3DLast(CtoDValve1, "Z", 90 deg)
CoagDtoClValve2 := insertdwg("https://confluence.cornell.edu/download/attachments/173604905/BallValve.dwg", CtoDValve2, 1/250, 1/250, 0 deg)
RotateDtoCValve2 := Rotate3DLast(CtoDValve2, "Z", 90 deg)
ChlorDtoClValve3 := insertdwg("https://confluence.cornell.edu/download/attachments/173604905/BallValve.dwg", CtoDValve3, 1/250, 1/250, 0 deg)
RotateDtoCValve3 := Rotate3DLast(CtoDValve3, "Z", 90 deg)
ChlorDtoClValve4 := insertdwg("https://confluence.cornell.edu/download/attachments/173604905/BallValve.dwg", CtoDValve4, 1/250, 1/250, 0 deg)
RotateDtoCValve4 := Rotate3DLast(CtoDValve4, "Z", 90 deg)
DtoCConnectionScript_Valves := stack(CoagDtoClValve1, RotateDtoCValve1, CoagDtoClValve2, RotateDtoCValve2, ChlorDtoClValve3, RotateDtoCValve3, ChlorDtoClValve4, RotateDtoCValve4)
ElbowCoagDeliveryLeft := ElbowF(CoagDeliveryPipe_Origin, [-90; 0; 90]*deg, ND_DeliveryPipe, SDR_13.5)
ElbowChlorDeliveryLeft := ElbowF(ChlorDeliveryPipe_Origin, [-90; 0; 90]*deg, ND_DeliveryPipe, SDR_13.5)
ElbowCoagDeliveryCutOut := ElbowF(CoagDeliveryPipe_Origin - [L_CoagDeliveryPipe; 0 m; 0 m], [0; 0; 0], ND_DeliveryPipe, SDR_13.5)
2*sin(45 deg)*SocketDepth(ND_DeliveryPipe) = 0.0240416 m
ElbowChlorDeliveryCutOut := ElbowF(ChlorDeliveryPipe_Origin - [L_ChlorDeliveryPipe; 0 m; 0 m], [90; 0; 90], ND_DeliveryPipe, SDR_13.5)
[-135; 90; 0]
# Option 1:Eliminate the top right elbow and modify the tee code and add a ball valve on top
# option 2: repla90 the top right elbow with a tee and ball valve without changing the tee code
# Coag 45 deg Elbows
# Only for Autocad 2015
Elbow45CoagDosingBottomRight := Elbow45F(CoagDosingTube_Origin + [
    -L_PVCBallValve - ShortTeeLength(ND_DeliveryPipe) - SocketDepth(ND_DeliveryPipe);
    0 m;
    (N_CoagTubes - 1)*(TeeLength(ND_DeliveryPipe) + 2*SocketDepth(ND_DeliveryPipe)) + .5*TeeLength(ND_DeliveryPipe) + 2*SocketDepth(ND_DeliveryPipe)
], [0; -90; 90]*deg, ND_DeliveryPipe, SDR_13.5)
Elbow45CoagDosingMiddleRight := Elbow45F(CoagDosingTube_Origin + [
    -L_PVCBallValve - ShortTeeLength(ND_DeliveryPipe) - SocketDepth(ND_DeliveryPipe);
    (ElbowRadius(ND_DeliveryPipe)*(sin(45 deg)/sin(67.5 deg)))*cos(67.5 deg) + 2*(SocketDepth(ND_DeliveryPipe)*cos(45 deg));
    ((N_CoagTubes - 1)*(TeeLength(ND_DeliveryPipe) + 2*SocketDepth(ND_DeliveryPipe)) + .5*TeeLength(ND_DeliveryPipe) + 2*SocketDepth(ND_DeliveryPipe)) + (ElbowRadius(ND_DeliveryPipe)*(sin(45 deg)/sin(67.5 deg)))*sin(67.5 deg) + 2*(SocketDepth(ND_DeliveryPipe)*cos(45 deg))
], [45; 90; 0]*deg, ND_DeliveryPipe, SDR_13.5)
Elbow45CoagDosingMiddleTopRight := Elbow45F(CoagDosingTube_Origin + [
    -L_PVCBallValve - ShortTeeLength(ND_DeliveryPipe) - SocketDepth(ND_DeliveryPipe);
    2*(ElbowRadius(ND_DeliveryPipe)*(sin(45 deg)/sin(67.5 deg)))*cos(67.5 deg) + 2*(SocketDepth(ND_DeliveryPipe)*cos(45 deg));
    ((N_CoagTubes - 1)*(TeeLength(ND_DeliveryPipe) + 2*SocketDepth(ND_DeliveryPipe)) + .5*TeeLength(ND_DeliveryPipe) + 2*SocketDepth(ND_DeliveryPipe)) + 2*(ElbowRadius(ND_DeliveryPipe)*(sin(45 deg)/sin(67.5 deg)))*sin(67.5 deg) + 2*(SocketDepth(ND_DeliveryPipe)*cos(45 deg)) + L_CoagAirReleaseConnectorMiddleRightPipe
], [90; 90; 0]*deg, ND_DeliveryPipe, SDR_13.5)
Elbow45CoagDosingTopRight := Elbow45F(CoagDosingTube_Origin + [
    -L_PVCBallValve - ShortTeeLength(ND_DeliveryPipe) - SocketDepth(ND_DeliveryPipe);
    0 m;
    ((N_CoagTubes - 1)*(TeeLength(ND_DeliveryPipe) + 2*SocketDepth(ND_DeliveryPipe)) + .5*TeeLength(ND_DeliveryPipe) + 2*SocketDepth(ND_DeliveryPipe)) + 4*(ElbowRadius(ND_DeliveryPipe)*(sin(45 deg)/sin(67.5 deg)))*sin(67.5 deg) + 4*(SocketDepth(ND_DeliveryPipe)*cos(45 deg)) + L_CoagAirReleaseConnectorMiddleRightPipe
], [-90; 90; 0]*deg, ND_DeliveryPipe, SDR_13.5)
# Currently in use: Autocad 2013
Elbow45CoagDosingBottomRight := ElbowF(CoagDosingTube_Origin + [
    -L_PVCBallValve - ShortTeeLength(ND_DeliveryPipe) - SocketDepth(ND_DeliveryPipe);
    0 m;
    (N_CoagTubes - 1)*(TeeLength(ND_DeliveryPipe) + 2*SocketDepth(ND_DeliveryPipe)) + .5*TeeLength(ND_DeliveryPipe) + 2*SocketDepth(ND_DeliveryPipe)
], [0; -90; 90]*deg, ND_DeliveryPipe, SDR_13.5)
SocketDepth(ND_DeliveryPipe) = 0.017 m
ElbowRadius(ND_DeliveryPipe) = 0.01475 m
Elbow45CoagDosingMiddleRight := ElbowF(CoagDosingTube_Origin + [
    -L_PVCBallValve - ShortTeeLength(ND_DeliveryPipe) - SocketDepth(ND_DeliveryPipe);
    ElbowRadius(ND_DeliveryPipe) + 2*SocketDepth(ND_DeliveryPipe);
    ((N_CoagTubes - 1)*(TeeLength(ND_DeliveryPipe) + 2*SocketDepth(ND_DeliveryPipe)) + .5*TeeLength(ND_DeliveryPipe) + 2*SocketDepth(ND_DeliveryPipe)) + ElbowRadius(ND_DeliveryPipe)
], [0; 90; 0]*deg, ND_DeliveryPipe, SDR_13.5)
Elbow45CoagDosingMiddleTopRight := ElbowF(CoagDosingTube_Origin + [
    -L_PVCBallValve - ShortTeeLength(ND_DeliveryPipe) - SocketDepth(ND_DeliveryPipe);
    2*ElbowRadius(ND_DeliveryPipe) + 2*SocketDepth(ND_DeliveryPipe);
    ((N_CoagTubes - 1)*(TeeLength(ND_DeliveryPipe) + 2*SocketDepth(ND_DeliveryPipe)) + .5*TeeLength(ND_DeliveryPipe) + 2*SocketDepth(ND_DeliveryPipe)) + 2*ElbowRadius(ND_DeliveryPipe) + 2*SocketDepth(ND_DeliveryPipe) + L_CoagAirReleaseConnectorMiddleRightPipe
], [90; 90; 0]*deg, ND_DeliveryPipe, SDR_13.5)
Elbow45CoagDosingTopRight := ElbowF(CoagDosingTube_Origin + [
    -L_PVCBallValve - ShortTeeLength(ND_DeliveryPipe) - SocketDepth(ND_DeliveryPipe);
    0 m;
    ((N_CoagTubes - 1)*(TeeLength(ND_DeliveryPipe) + 2*SocketDepth(ND_DeliveryPipe)) + .5*TeeLength(ND_DeliveryPipe) + 2*SocketDepth(ND_DeliveryPipe)) + 4*ElbowRadius(ND_DeliveryPipe) + 2*SocketDepth(ND_DeliveryPipe) + L_CoagAirReleaseConnectorMiddleRightPipe
], [-90; 90; 0]*deg, ND_DeliveryPipe, SDR_13.5)
# Only for AutoCAD 2015
Elbow45CoagDosingBottomLeft := Elbow45F(CoagDosingTube_Origin + [
    L_CoagTube + L_PVCBallValve + ShortTeeLength(ND_DeliveryPipe) + SocketDepth(ND_DeliveryPipe);
    0 m;
    (N_CoagTubes - 1)*(TeeLength(ND_DeliveryPipe) + 2*SocketDepth(ND_DeliveryPipe)) + .5*TeeLength(ND_DeliveryPipe) + 2*SocketDepth(ND_DeliveryPipe)
], [0; -90; 90]*deg, ND_DeliveryPipe, SDR_13.5)
Elbow45CoagDosingMiddleLeft := Elbow45F(CoagDosingTube_Origin + [
    L_CoagTube + L_PVCBallValve + ShortTeeLength(ND_DeliveryPipe) + SocketDepth(ND_DeliveryPipe);
    (ElbowRadius(ND_DeliveryPipe)*(sin(45 deg)/sin(67.5 deg)))*cos(67.5 deg) + 2*(SocketDepth(ND_DeliveryPipe)*cos(45 deg));
    ((N_CoagTubes - 1)*(TeeLength(ND_DeliveryPipe) + 2*SocketDepth(ND_DeliveryPipe)) + .5*TeeLength(ND_DeliveryPipe) + 2*SocketDepth(ND_DeliveryPipe)) + (ElbowRadius(ND_DeliveryPipe)*(sin(45 deg)/sin(67.5 deg)))*sin(67.5 deg) + 2*(SocketDepth(ND_DeliveryPipe)*cos(45 deg))
], [45; 90; 0]*deg, ND_DeliveryPipe, SDR_13.5)
Elbow45CoagDosingMiddleTopLeft := Elbow45F(CoagDosingTube_Origin + [
    L_CoagTube + L_PVCBallValve + ShortTeeLength(ND_DeliveryPipe) + SocketDepth(ND_DeliveryPipe);
    2*(ElbowRadius(ND_DeliveryPipe)*(sin(45 deg)/sin(67.5 deg)))*cos(67.5 deg) + 2*(SocketDepth(ND_DeliveryPipe)*cos(45 deg));
    ((N_CoagTubes - 1)*(TeeLength(ND_DeliveryPipe) + 2*SocketDepth(ND_DeliveryPipe)) + .5*TeeLength(ND_DeliveryPipe) + 2*SocketDepth(ND_DeliveryPipe)) + 2*(ElbowRadius(ND_DeliveryPipe)*(sin(45 deg)/sin(67.5 deg)))*sin(67.5 deg) + 2*(SocketDepth(ND_DeliveryPipe)*cos(45 deg)) + L_CoagAirReleaseConnectorMiddleRightPipe
], [90; 90; 0]*deg, ND_DeliveryPipe, SDR_13.5)
Elbow45CoagDosingTopLeft := Elbow45F(CoagDosingTube_Origin + [
    L_CoagTube + L_PVCBallValve + ShortTeeLength(ND_DeliveryPipe) + SocketDepth(ND_DeliveryPipe);
    0 m;
    ((N_CoagTubes - 1)*(TeeLength(ND_DeliveryPipe) + 2*SocketDepth(ND_DeliveryPipe)) + .5*TeeLength(ND_DeliveryPipe) + 2*SocketDepth(ND_DeliveryPipe)) + 4*(ElbowRadius(ND_DeliveryPipe)*(sin(45 deg)/sin(67.5 deg)))*sin(67.5 deg) + 4*(SocketDepth(ND_DeliveryPipe)*cos(45 deg)) + L_CoagAirReleaseConnectorMiddleRightPipe
], [-90; 90; 0]*deg, ND_DeliveryPipe, SDR_13.5)
# Currently in use: Autocad 2013
Elbow45CoagDosingBottomLeft := ElbowF(CoagDosingTube_Origin + [
    L_CoagTube + L_PVCBallValve + ShortTeeLength(ND_DeliveryPipe) + SocketDepth(ND_DeliveryPipe);
    0 m;
    (N_CoagTubes - 1)*(TeeLength(ND_DeliveryPipe) + 2*SocketDepth(ND_DeliveryPipe)) + .5*TeeLength(ND_DeliveryPipe) + 2*SocketDepth(ND_DeliveryPipe)
], [0; -90; 90]*deg, ND_DeliveryPipe, SDR_13.5)
Elbow45CoagDosingMiddleLeft := ElbowF(CoagDosingTube_Origin + [
    L_CoagTube + L_PVCBallValve + ShortTeeLength(ND_DeliveryPipe) + SocketDepth(ND_DeliveryPipe);
    ElbowRadius(ND_DeliveryPipe) + 2*SocketDepth(ND_DeliveryPipe);
    ((N_CoagTubes - 1)*(TeeLength(ND_DeliveryPipe) + 2*SocketDepth(ND_DeliveryPipe)) + .5*TeeLength(ND_DeliveryPipe) + 2*SocketDepth(ND_DeliveryPipe)) + ElbowRadius(ND_DeliveryPipe)
], [0; 90; 0]*deg, ND_DeliveryPipe, SDR_13.5)
Elbow45CoagDosingMiddleTopLeft := ElbowF(CoagDosingTube_Origin + [
    L_CoagTube + L_PVCBallValve + ShortTeeLength(ND_DeliveryPipe) + SocketDepth(ND_DeliveryPipe);
    2*ElbowRadius(ND_DeliveryPipe) + 2*SocketDepth(ND_DeliveryPipe);
    ((N_CoagTubes - 1)*(TeeLength(ND_DeliveryPipe) + 2*SocketDepth(ND_DeliveryPipe)) + .5*TeeLength(ND_DeliveryPipe) + 2*SocketDepth(ND_DeliveryPipe)) + 2*ElbowRadius(ND_DeliveryPipe) + 2*SocketDepth(ND_DeliveryPipe) + L_CoagAirReleaseConnectorMiddleRightPipe
], [90; 90; 0]*deg, ND_DeliveryPipe, SDR_13.5)
Elbow45CoagDosingTopLeft := ElbowF(CoagDosingTube_Origin + [
    L_CoagTube + L_PVCBallValve + ShortTeeLength(ND_DeliveryPipe) + SocketDepth(ND_DeliveryPipe);
    0 m;
    ((N_CoagTubes - 1)*(TeeLength(ND_DeliveryPipe) + 2*SocketDepth(ND_DeliveryPipe)) + .5*TeeLength(ND_DeliveryPipe) + 2*SocketDepth(ND_DeliveryPipe)) + 4*ElbowRadius(ND_DeliveryPipe) + 2*SocketDepth(ND_DeliveryPipe) + L_CoagAirReleaseConnectorMiddleRightPipe
], [-90; 90; 0]*deg, ND_DeliveryPipe, SDR_13.5)
# Manifold Tees
TeeCoagDosingTopRight := TeeF(CoagDosingTube_Origin + [-L_PVCBallValve - SocketDepth(ND_DeliveryPipe); 0 m; B_DosingTubes*(N_CoagTubes - 1)], [-90; 0; -90]*deg, ND_DeliveryPipe, SDR_13.5)
TeeChlorDosingTopRight := TeeF(ChlorDosingTube_Origin + [-L_PVCBallValve - SocketDepth(ND_DeliveryPipe); 0 m; B_DosingTubes*(N_ChlorTubes - 1)], [-90; 0; -90]*deg, ND_DeliveryPipe, SDR_13.5)
CoagTees :=
    CoagTeeStack ← layer_new("CdcCoagTees", green)
    for i ∈ 0 .. max(N_CoagTubes - 1, 0)
        CoagTeeStack ← stack(CoagTeeStack, TeeF(CoagDosingTube_Origin + [-L_PVCBallValve - SocketDepth(ND_DeliveryPipe); 0 m; B_DosingTubes*i], [-90; 0; 90]*deg, ND_DeliveryPipe, SDR_13.5))
        CoagTeeStack ← stack(CoagTeeStack, TeeF(CoagDosingTube_Origin + [L_CoagTube + L_PVCBallValve + SocketDepth(ND_DeliveryPipe); 0 m; B_DosingTubes*i], [90; 0; 90]*deg, ND_DeliveryPipe, SDR_13.5))
        i ← i + 1
    return CoagTeeStack
ChlorTees :=
    ChlorTeeStack ← layer_new("CdcChlorTees", green)
    for i ∈ 0 .. max(N_ChlorTubes - 1, 0)
        ChlorTeeStack ← stack(ChlorTeeStack, TeeF(ChlorDosingTube_Origin + [-L_PVCBallValve - SocketDepth(ND_DeliveryPipe); 0 m; B_DosingTubes*i], [-90; 0; 90]*deg, ND_DeliveryPipe, SDR_13.5))
        ChlorTeeStack ← stack(ChlorTeeStack, TeeF(ChlorDosingTube_Origin + [L_ChlorTube + L_PVCBallValve + SocketDepth(ND_DeliveryPipe); 0 m; B_DosingTubes*i], [90; 0; 90]*deg, ND_DeliveryPipe, SDR_13.5))
        i ← i + 1
    return ChlorTeeStack
# Air Release Caps
ChlorAirReleaseRightCap := CapF(ChlorDosingTube_Origin + [
    -L_PVCBallValve - ShortTeeLength(ND_DeliveryPipe) - SocketDepth(ND_DeliveryPipe);
    0 m;
    (N_ChlorTubes - 1)*(TeeLength(ND_DeliveryPipe) + 2*SocketDepth(ND_DeliveryPipe)) + .5*TeeLength(ND_DeliveryPipe) + L_ChlorAirReleasePipe
], [0; -90]*deg, ND_DeliveryPipe)
ChlorAirReleaseLeftCap := CapF(ChlorDosingTube_Origin + [
    (L_ChlorTube + L_PVCBallValve) + ShortTeeLength(ND_DeliveryPipe) + SocketDepth(ND_DeliveryPipe);
    0 m;
    (N_ChlorTubes - 1)*(TeeLength(ND_DeliveryPipe) + 2*SocketDepth(ND_DeliveryPipe)) + .5*TeeLength(ND_DeliveryPipe) + L_ChlorAirReleasePipe
], [0; -90]*deg, ND_DeliveryPipe)
CoagAirReleaseRightCap := CapF(CoagDosingTube_Origin + [
    -L_PVCBallValve - ShortTeeLength(ND_DeliveryPipe) - SocketDepth(ND_DeliveryPipe);
    0 m;
    ((N_CoagTubes - 1)*(TeeLength(ND_DeliveryPipe) + 2*SocketDepth(ND_DeliveryPipe)) + .5*TeeLength(ND_DeliveryPipe) + 2*SocketDepth(ND_DeliveryPipe)) + 4*(ElbowRadius(ND_DeliveryPipe)*(sin(45 deg)/sin(67.5 deg)))*sin(67.5 deg) + 4*(SocketDepth(ND_DeliveryPipe)*cos(45 deg)) + L_CoagAirReleaseConnectorMiddleRightPipe + (L_ChlorAirReleasePipe - ((ElbowRadius(ND_DeliveryPipe)*(sin(45 deg)/sin(67.5 deg)))*sin(67.5 deg) + 2*(SocketDepth(ND_DeliveryPipe)*cos(45 deg))))
], [0; -90]*deg, ND_DeliveryPipe)
CoagAirReleaseLeftCap := CapF(CoagDosingTube_Origin + [
    L_CoagTube + L_PVCBallValve + ShortTeeLength(ND_DeliveryPipe) + SocketDepth(ND_DeliveryPipe);
    0 m;
    ((N_CoagTubes - 1)*(TeeLength(ND_DeliveryPipe) + 2*SocketDepth(ND_DeliveryPipe)) + .5*TeeLength(ND_DeliveryPipe) + 2*SocketDepth(ND_DeliveryPipe)) + 4*(ElbowRadius(ND_DeliveryPipe)*(sin(45 deg)/sin(67.5 deg)))*sin(67.5 deg) + 4*(SocketDepth(ND_DeliveryPipe)*cos(45 deg)) + L_CoagAirReleaseConnectorMiddleRightPipe + (L_ChlorAirReleasePipe - ((ElbowRadius(ND_DeliveryPipe)*(sin(45 deg)/sin(67.5 deg)))*sin(67.5 deg) + 2*(SocketDepth(ND_DeliveryPipe)*cos(45 deg))))
], [0; -90]*deg, ND_DeliveryPipe)
# Currently in use: Autocad 2013
CoagAirReleaseRightCap := CapF(CoagDosingTube_Origin + [
    -L_PVCBallValve - ShortTeeLength(ND_DeliveryPipe) - SocketDepth(ND_DeliveryPipe);
    0 m;
    ((N_CoagTubes - 1)*(TeeLength(ND_DeliveryPipe) + 2*SocketDepth(ND_DeliveryPipe)) + .5*TeeLength(ND_DeliveryPipe) + 2*SocketDepth(ND_DeliveryPipe)) + 4*ElbowRadius(ND_DeliveryPipe) + 4*SocketDepth(ND_DeliveryPipe) + L_CoagAirReleaseConnectorMiddleRightPipe + (L_ChlorAirReleasePipe - 3*CapHeight(ND_DeliveryPipe))
], [0; -90]*deg, ND_DeliveryPipe)
CoagAirReleaseLeftCap := CapF(CoagDosingTube_Origin + [
    L_CoagTube + L_PVCBallValve + ShortTeeLength(ND_DeliveryPipe) + SocketDepth(ND_DeliveryPipe);
    0 m;
    ((N_CoagTubes - 1)*(TeeLength(ND_DeliveryPipe) + 2*SocketDepth(ND_DeliveryPipe)) + .5*TeeLength(ND_DeliveryPipe) + 2*SocketDepth(ND_DeliveryPipe)) + 4*ElbowRadius(ND_DeliveryPipe) + 4*SocketDepth(ND_DeliveryPipe) + L_CoagAirReleaseConnectorMiddleRightPipe + (L_ChlorAirReleasePipe - 3*CapHeight(ND_DeliveryPipe))
], [0; -90]*deg, ND_DeliveryPipe)
# Ball Valves
CdcCoagBallValve := insertdwg("https://confluence.cornell.edu/download/attachments/173604905/PvcBallValve+Scaled.dwg", CoagDosingTube_Origin + [-L_PVCBallValve; 0 m; 0 m], ND_DeliveryPipe/(2 in), ND_DeliveryPipe/(2 in), 180 deg)
RotateCdcCoagBallValve := Rotate3DLast(CoagDosingTube_Origin + [-L_PVCBallValve; 0 m; 0 m], "y", 90 deg)
ArrayCoagBallValve := ArrayLast(N_CoagTubes, 1, B_DosingTubes)
MirrorCoagValves := Mirror3dAll("yz", [
    CoagDosingTube_Origin[0] + .5*L_CoagTube;
    CoagDosingTube_Origin[1];
    CoagDosingTube_Origin[2] + 1/4*H_Et + ShortTeeLength(ND_DeliveryPipe) + .5*ND_DeliveryPipe
], "n")
CdcCoagBallValveAir := insertdwg("https://confluence.cornell.edu/download/attachments/173604905/PvcBallValve+Scaled.dwg", CoagDosingTube_Origin + [
    -L_PVCBallValve - ShortTeeLength(ND_DeliveryPipe) - SocketDepth(ND_DeliveryPipe);
    0 m;
    (N_CoagTubes + 1)*TeeLength(ND_DeliveryPipe) + ((2*N_CoagTubes + 1)*SocketDepth(ND_DeliveryPipe)) - ShortTeeLength(ND_DeliveryPipe)
], ND_DeliveryPipe/(2 in), ND_DeliveryPipe/(2 in), -90 deg)
CdcChlorineBallValve := insertdwg("https://confluence.cornell.edu/download/attachments/173604905/PvcBallValve+Scaled.dwg", ChlorDosingTube_Origin + [-L_PVCBallValve; 0 m; 0 m], ND_DeliveryPipe/(2 in), ND_DeliveryPipe/(2 in), 180 deg)
RotateCdcChlorineBallValve := Rotate3DLast(ChlorDosingTube_Origin + [-L_PVCBallValve; 0 m; 0 m], "y", 90 deg)
ArrayChlorineBallValve := ArrayLast(N_ChlorTubes, 1, B_DosingTubes)
MirrorChlorineValves := Mirror3dAll("yz", [
    ChlorDosingTube_Origin[0] + .5*L_ChlorTube;
    ChlorDeliveryPipe_Origin[1];
    ChlorDeliveryPipe_Origin[2]
], "n")
CdcChlorineBallValveAir := insertdwg("https://confluence.cornell.edu/download/attachments/173604905/PvcBallValve+Scaled.dwg", ChlorDosingTube_Origin + [
    -L_PVCBallValve - ShortTeeLength(ND_DeliveryPipe) - SocketDepth(ND_DeliveryPipe);
    0 m;
    (N_ChlorTubes + 1)*TeeLength(ND_DeliveryPipe) + ((2*N_ChlorTubes + 1)*SocketDepth(ND_DeliveryPipe)) - ShortTeeLength(ND_DeliveryPipe)
], ND_DeliveryPipe/(2 in), ND_DeliveryPipe/(2 in), -90 deg)
CdcManifoldCoagPipe_Script := stack(CdcCoagManifoldPluLayer, CoagConnectorPipe, view("f"), ArrayCoagConnectorPipe, MirrorCoagConnectorPipe, view("t"), CoagDeliveryConnectorPipeLong, CoagDeliveryPipe, CdcCoagManifoldPluFrz)
CdcManifoldChlorPipe_Script := stack(CdcChlorManifoldPluLayer, ChlorConnectorPipe, view("f"), ArrayChlorConnectorPipe, MirrorChlorConnectorPipe, view("t"), ChlorDeliveryConnectorPipeLong, ChlorDeliveryPipe, CdcChlorManifoldPluFrz)
CdcManifoldCoagAirReleasePipe_Script := stack(SelectCdcCoagManifoldPlu, CoagAirReleaseConnectorBottomRightPipe, CoagAirReleaseConnectorBottomLeftPipe, CoagAirReleaseConnectorMiddleRightPipe, CoagAirReleaseConnectorMiddleLeftPipe, CoagAirReleaseConnectorTopRightPipe, CoagAirReleaseConnectorTopLeftPipe, CoagAirReleaseRightPipe, CoagAirReleaseLeftPipe, CdcCoagManifoldPluFrz)
CdcManifoldChlorAirReleasePipe_Script := stack(SelectCdcChlorManifoldPlu, ChlorAirReleaseRightPipe, ChlorAirReleaseLeftPipe, CdcChlorManifoldPluFrz)
CdcManifoldFitting_Script := stack(CdcManifoldFittingsLayer, DtoCConnectionScript_Fitting, DtoCElbowbridge_elbows, CouplingCoagCHT, CouplingChlorCHT, ElbowCoagDeliveryLeft, ElbowChlorDeliveryLeft, CoagAirReleaseRightCap, CoagAirReleaseLeftCap, ChlorAirReleaseRightCap, ChlorAirReleaseLeftCap, CdcManifoldFittingsFrz, CdcCoagTeesLayer, CoagTees, CdcCoagTeesFrz, CdcChlorTeesLayer, ChlorTees, CdcChlorTeesFrz)
CdcCoagAirRelease45Elbow_Script := stack(SelectCdcManifoldFittings, Elbow45CoagDosingBottomRight, Elbow45CoagDosingBottomLeft, Elbow45CoagDosingMiddleRight, Elbow45CoagDosingMiddleLeft, Elbow45CoagDosingMiddleTopRight, Elbow45CoagDosingMiddleTopLeft, Elbow45CoagDosingTopRight, Elbow45CoagDosingTopLeft, CdcManifoldFittingsFrz)
CdcManifoldTees2_Script := stack(CdcCoagTeesLayer, CoagTees, CdcCoagTeesFrz, ChlorTees, CdcChlorTeesFrz)
CdcManifoldValve_Script := stack(CdcCoagManifoldValvesLayer, CdcCoagBallValve, RotateCdcCoagBallValve, view("f"), ArrayCoagBallValve, MirrorCoagValves, view("t"), CdcCoagManifoldValvesFrz, CdcChlorManifoldValvesLayer, CdcChlorineBallValve, RotateCdcChlorineBallValve, view("f"), ArrayChlorineBallValve, MirrorChlorineValves, view("t"), DtoCConnectionScript_Valves, CdcChlorManifoldValvesFrz)
CdcManifold_Script := stack(CdcManifoldCoagPipe_Script, CdcManifoldChlorPipe_Script, CdcManifoldCoagAirReleasePipe_Script, CdcManifoldChlorAirReleasePipe_Script, CdcManifoldFitting_Script, CdcCoagAirRelease45Elbow_Script, CdcManifoldValve_Script)
CdcChlorineBallValveAir
# Dosing Tubes
L_CoagTube = 1.40483 m
D_CoagTubeStockToCHEst = 0.134616 in
N_CoagTubes = 3
L_ChlorTube = 1.7607 m
D_ChlorTubeStockToCHEst = 0.145774 in
N_ChlorTubes = 3
CoagTube := PipeF(CoagDosingTube_Origin, L_CoagTube, [180; 0]*deg, D_CoagTubeStockToCHEst, PS_FlexTube)
ArrayCoagTube := ArrayLast(max(N_CoagTubes - 1, 2), 1, B_DosingTubes)
ChlorineTube := PipeF(ChlorDosingTube_Origin, L_ChlorTube, [180; 0]*deg, D_ChlorTubeStockToCHEst, PS_FlexTube)
ArrayChlorineTube := ArrayLast(max(N_ChlorTubes, 2), 1, B_DosingTubes)
CoagDosingPipe := PipeF(CoagDosingTube_Origin + [
    -L_PVCBallValve - SocketDepth(ND_DeliveryPipe) - ShortTeeLength(ND_DeliveryPipe);
    0 m;
    -0.5*TeeLength(ND_DeliveryPipe) - SocketDepth(ND_DeliveryPipe)
], 3*SocketDepth(ND_DeliveryPipe), [0; -90]*deg, ND_DeliveryPipe, SDR_13.5)
ChlorDosingPipe := PipeF(ChlorDosingTube_Origin + [
    -L_PVCBallValve - SocketDepth(ND_DeliveryPipe) - ShortTeeLength(ND_DeliveryPipe);
    0 m;
    -0.5*TeeLength(ND_DeliveryPipe) - SocketDepth(ND_DeliveryPipe)
], 3*SocketDepth(ND_DeliveryPipe), [0; -90]*deg, ND_DeliveryPipe, SDR_13.5)
CdcDosing_Script := stack(CdcDosingTubesLayer, CoagTube, view("f"), ArrayCoagTube, view("t"), ChlorineTube, view("f"), ArrayChlorineTube, view("t"), CoagDosingPipe, ChlorDosingPipe, CdcDosingTubesFrz)
# Calibration Column Dependent Pipe Length Calculations | mrf222 Spring 2016
L_CoagCalPipe1 := CoagFlowTee_Origin[2] - CoagCCElbow1_Origin[2] - TeeLength(ND_CoagPipe)/2
L_ChlorCalPipe1 := ChlorFlowTee_Origin[2] - ChlorCCElbow2_Origin[2] - TeeLength(ND_ChlorPipe)/2
L_CoagFluidCol := CoagTopCap1_Origin[2] - CoagCCElbow2_Origin[2]
L_ChlorFluidCol := ChlorTopCap1_Origin[2] - ChlorCCElbow1_Origin[2]
L_CoagFlowSolid := CoagTopCap1_Origin[2] - CoagFlowSolidPipe_Origin[2]
L_ChlorFlowSolid := ChlorTopCap2_Origin[2] - ChlorFlowSolidPipe_Origin[2]
# Calibration Column Drawing | mrf222 Spring 2016
# Flexible Tubing Drawing
FlexTubeF(origin, end, dirToStart, dirToEnd, vORhS, vORh, dip, ND, layer, bulge, tolerance) :=
    newlayer ← layer_new(layer, red)
    selectlayer ← SelectLayer(layer)
    frzlayer ← FreezeLayer(layer)
    sublayer ← concat(layer, "sub")
    newsublayer ← layer_new(sublayer, purple)
    selectsublayer ← SelectLayer(sublayer)
    frzsublayer ← FreezeLayer(sublayer)
    subtract ← SubtractF([layer], "DeleteMe")
    addStart ←
        [0; 0; 1] if vORhS == 1
        [1; 0; 0] otherwise
    addEnd ←
        [0; 0; 1] if vORh == 1
        [1; 0; 0] otherwise
    p1 ← origin + addStart*dirToStart*(-3)*cm
    p2 ← end + addEnd*dirToEnd*3*cm
    slack ← [(p1[0] + p2[0])/2 + bulge; (p1[1] + p2[1])/2; (p1[2] + p2[2])/2 + dip]
    one ← stack("circle", point(origin), stringit(ND))
    two ← stack("spline", point(origin), point(p1), point(slack), point(p2), point(end), Enter)
    three ← stack("sweep", "all", "r", "last", Enter, "twist", "bank", "last")
    four ← stack("circle", point(origin), stringit(ND*.75))
    return stack(newlayer, selectlayer, one, two, three, frzlayer, newsublayer, selectsublayer, four, two, three, GroupDelete, subtract, frzsublayer)
dir1 := 1
point(Flex1_Origin) = "-7.03862,6.23089,2.69056"
vORh1 := 0
vORh2 := 1
bulge := 0
Flex1 := FlexTubeF(Flex1_Origin, Flex1_End, dir1, dir1, vORh2, vORh1, -6 cm, .125 in, "CdcFlexTube1", bulge, 0)
Flex2 := FlexTubeF(Flex2_Origin, Flex2_End, dir1, dir1, vORh2, vORh1, -9 cm, .125 in, "CdcFlexTube2", bulge, 0)
Flex3 := FlexTubeF(Flex3_Origin, Flex3_End, dir1, dir1, vORh2, vORh1, -9 cm, .125 in, "CdcFlexTube3", bulge, 0)
Flex4 := FlexTubeF(Flex4_Origin, Flex4_End, dir1, dir1, vORh2, vORh1, -6 cm, .125 in, "CdcFlexTube4", bulge, 0)
dir2 := -1
Flex5 := FlexTubeF(Flex5_Origin, Flex5_End, dir1, dir1, vORh2, vORh2, -6 cm, .125 in, "CdcFlexTube5", 5 cm, 0)  # Need to fix the direction of the exit
Flex6 := FlexTubeF(Flex6_Origin, Flex6_End, dir1, dir1, vORh2, vORh2, -9 cm, .125 in, "CdcFlexTube6", 5 cm, 0)
Flex7 := FlexTubeF(Flex7_Origin, Flex7_End, dir1, dir1, vORh2, vORh2, -9 cm, .125 in, "CdcFlexTube7", 7 cm, 0)
Flex8 := FlexTubeF(Flex8_Origin, Flex8_End, dir1, dir1, vORh2, vORh2, -6 cm, .125 in, "CdcFlexTube8", 7 cm, 0)
Flex9 := FlexTubeF(Flex9_Origin, Flex9_End, dir1, dir2, vORh1, vORh2, -4 cm, .125 in, "CdcFlexTube9", bulge, .01)
Flex10 := FlexTubeF(Flex10_Origin, Flex10_End, dir2, dir2, vORh1, vORh2, -7 cm, .125 in, "CdcFlexTube10", bulge, .01)
FlexScript := stack(Flex1, Flex2, Flex3, Flex4, Flex5, Flex6, Flex7, Flex8, Flex9, Flex10)
CoagTee1 := TeeF(CoagFlowTee_Origin, [0; -90; 0]*deg, ND_CoagPipe, SDR_13.5)
ChlorTee1 := TeeF(ChlorFlowTee_Origin, [180; -90; 0]*deg, ND_ChlorPipe, SDR_13.5)
CoagPipe1 := PipeF(CoagCCElbow1_Origin, L_CoagCalPipe1, [0; 90]*deg, ND_CoagPipe, SDR_13.5)
ChlorPipe1 := PipeF(ChlorCCElbow2_Origin, L_ChlorCalPipe1, [0; 90]*deg, ND_ChlorPipe, SDR_13.5)
CoagFluidCol := PipeF(CoagFluidCol_Origin, L_CoagFluidCol, [0; 90]*deg, ND_CoagPipe, SDR_13.5)
ChlorFluidCol := PipeF(ChlorFluidCol_Origin, L_ChlorFluidCol, [0; 90]*deg, ND_ChlorPipe, SDR_13.5)
CoagFlowCol := PipeF(CoagFlowCol_Origin, H_FlowCalCol, [0; 90]*deg, ND_CoagPipe, SDR_13.5)
ChlorFlowCol := PipeF(ChlorFlowCol_Origin, H_FlowCalCol, [0; 90]*deg, ND_ChlorPipe, SDR_13.5)
CoagTopCap1 := CapF(CoagTopCap1_Origin, [0; -90]*deg, ND_CoagPipe)
CoagTopCap2 := CapF(CoagTopCap2_Origin, [0; -90]*deg, ND_CoagPipe)
ChlorTopCap1 := CapF(ChlorTopCap1_Origin, [0; -90]*deg, ND_ChlorPipe)
ChlorTopCap2 := CapF(ChlorTopCap2_Origin, [0; -90]*deg, ND_ChlorPipe)
CoagCylinder1 := CylinderF(CoagCylinder1_Origin, ND_CoagPipe/3, 2*S_Fitting, [0; 90]*deg)
CoagCylinder2 := CylinderF(CoagCylinder2_Origin, ND_CoagPipe/3, 2*S_Fitting, [0; 90]*deg)  # These need to be subtracted from the caps.
ChlorCylinder1 := CylinderF(ChlorCylinder1_Origin, ND_ChlorPipe/3, 2*S_Fitting, [0; 90]*deg)
# What is the diameter of the holes drilled into the caps of the calibration columns? For now, assume that they are ND.cap/1.5 or 2/3 of the ND of the cap?
ChlorCylinder2 := CylinderF(ChlorCylinder2_Origin, ND_ChlorPipe/3, 2*S_Fitting, [0; 90]*deg)
CoagFlowColSolid := PipeF(CoagFlowSolidPipe_Origin, L_CoagFlowSolid, [0; 90]*deg, ND_CoagPipe, SDR_13.5)
ChlorFlowColSolid := PipeF(ChlorFlowSolidPipe_Origin, L_ChlorFlowSolid, [0; 90]*deg, ND_ChlorPipe, SDR_13.5)
CoagCoupling1 := CouplingF(CoagFlowCoupling_Origin, [0; 90]*deg, ND_CoagPipe, SDR_13.5)
ChlorCoupling1 := CouplingF(ChlorFlowCoupling_Origin, [0; 90]*deg, ND_ChlorPipe, SDR_13.5)
CHT1 := ConstantHeadTankF(CHT1_Origin, [90; 90; 90]*deg, D_CHT/2, H_CHT, T_CHTwall, .75*H_CHT, 1/3*in, 1/3*in, 1/3*in, 1/3*in)
CHT2 := ConstantHeadTankF(CHT2_Origin, [90; 90; 90]*deg, D_CHT/2, H_CHT, T_CHTwall, .75*H_CHT, 1/3*in, 1/3*in, 1/3*in, 1/3*in)
CHT3 := ConstantHeadTankF(CHT3_Origin, [90; 90; 90]*deg, D_CHT/2, H_CHT, T_CHTwall, .75*H_CHT, 1/3*in, 1/3*in, 1/3*in, 1/3*in)
CHT4 := ConstantHeadTankF(CHT4_Origin, [90; 90; 90]*deg, D_CHT/2, H_CHT, T_CHTwall, .75*H_CHT, 1/3*in, 1/3*in, 1/3*in, 1/3*in)
CoagTee2 := TeeF(CoagTee2_Origin, [0; -90; -90]*deg, ND_CoagPipe, SDR_13.5)
ChlorTee2 := TeeF(ChlorTee2_Origin, [0; -90; -90]*deg, ND_ChlorPipe, SDR_13.5)
CoagElbow1 := ElbowF(CoagElbow1_Origin, [90; 90; 0]*deg, ND_CoagCalCol, SDR_13.5)
ChlorElbow1 := ElbowF(ChlorElbow1_Origin, [90; -90; 180]*deg, ND_ChlorCalCol, SDR_13.5)
CoagPipe2 := PipeF(CoagPipe2_Origin, CoagTee2_Origin[1] - CoagPipe2_Origin[1] - TeeLength(ND_CoagPipe)/2, [-90; 0]*deg, ND_CoagPipe, SDR_13.5)
ChlorPipe2 := PipeF(ChlorPipe2_Origin, ChlorPipe2_Origin[1] - ChlorTee2_Origin[1] - TeeLength(ND_ChlorPipe)/2, [90; 0]*deg, ND_ChlorPipe, SDR_13.5)
CoagPipe3 := PipeF(CoagPipe3_Origin, CoagElbow1_Origin[1] - CoagPipe3_Origin[1] - ElbowRadius(ND_CoagPipe), [-90; 0]*deg, ND_CoagPipe, SDR_13.5)
ChlorPipe3 := PipeF(ChlorPipe3_Origin, ChlorPipe3_Origin[1] - ChlorElbow1_Origin[1] - ElbowRadius(ND_CoagPipe), [90; 0]*deg, ND_ChlorPipe, SDR_13.5)
CoagPipe4 := PipeF(CoagPipe4_Origin, CoagPipe4_Origin[2] - CoagValve1_Origin[2] - S_Fitting, [0; -90]*deg, ND_CoagPipe, SDR_13.5)
ChlorPipe4 := PipeF(ChlorPipe4_Origin, ChlorPipe4_Origin[2] - ChlorValve1_Origin[2] - S_Fitting, [0; -90]*deg, ND_ChlorPipe, SDR_13.5)
CoagPipe5 := PipeF(CoagPipe5_Origin, CoagPipe5_Origin[2] - CoagValve2_Origin[2] - S_Fitting, [0; -90]*deg, ND_CoagPipe, SDR_13.5)
ChlorPipe5 := PipeF(ChlorPipe5_Origin, ChlorPipe5_Origin[2] - ChlorValve2_Origin[2] - S_Fitting, [0; -90]*deg, ND_ChlorPipe, SDR_13.5)
# Valves and rotation of the valves (drawn in a separate layer)
CoagBallValve1 := insertdwg("https://confluence.cornell.edu/download/attachments/173604905/BallValve.dwg", CoagValve1_Origin, 1/250, 1/250, 0 deg)
RotateCoagBallValve1 := Rotate3DLast(CoagValve1_Origin, "Z", 90 deg)
CoagBallValve2 := insertdwg("https://confluence.cornell.edu/download/attachments/173604905/BallValve.dwg", CoagValve2_Origin, 1/250, 1/250, 0 deg)
RotateCoagBallValve2 := Rotate3DLast(CoagValve2_Origin, "Z", 90 deg)
ChlorBallValve1 := insertdwg("https://confluence.cornell.edu/download/attachments/173604905/BallValve.dwg", ChlorValve1_Origin, 1/250, 1/250, 0 deg)
RotateChlorBallValve1 := Rotate3DLast(ChlorValve1_Origin, "Z", 90 deg)
ChlorBallValve2 := insertdwg("https://confluence.cornell.edu/download/attachments/173604905/BallValve.dwg", ChlorValve2_Origin, 1/250, 1/250, 0 deg)
RotateChlorBallValve2 := Rotate3DLast(ChlorValve2_Origin, "Z", 90 deg)
CdcCalColValveScript := stack(CdcCCValveLayer, SelectCdcCCValve, CoagBallValve1, RotateCoagBallValve1, CoagBallValve2, RotateCoagBallValve2, ChlorBallValve1, RotateChlorBallValve1, ChlorBallValve2, RotateChlorBallValve2, CdcCCValveFrz)
CdcCalColFittingScript := stack(CoagTee1, ChlorTee1, CoagTopCap1, CoagTopCap1, CoagTopCap2, ChlorTopCap1, ChlorTopCap2, CoagCoupling1, ChlorCoupling1, CoagTee2, ChlorTee2, CoagElbow1, ChlorElbow1)
CdcSubtractCapHoles := SubtractF(["CdcCalColFittings"], "DeleteMe")
CdcCalColSubCapsScript := stack(CdcCalColDeleteLayer, SelectCdcCalColDelete, CoagCylinder1, CoagCylinder2, ChlorCylinder1, ChlorCylinder2, GroupDelete, CdcSubtractCapHoles, CdcCalColDeleteFrz)
CdcCalColPluScript := stack(DtoCPipes, CoagPipe1, ChlorPipe1, CoagFluidCol, ChlorFluidCol, CoagFlowCol, ChlorFlowCol, CoagFlowColSolid, ChlorFlowColSolid, CoagPipe2, ChlorPipe2, CoagPipe3, ChlorPipe3, CoagPipe4, ChlorPipe4, CoagPipe5, ChlorPipe5)
CdcCHT_Script := stack(CdcCHTLayer, CHT1, CHT2, CHT3, CHT4, CdcCHTFrz)
CdcCalCol_Script := stack(CdcCHT_Script, CdcCalColPluLayer, SelectCdcCalColPlu, CdcCalColPluScript, CdcCalColPluFrz, CdcCalColValveScript, CdcCalColFittingsLayer, SelectCdcCalColFittings, CdcCalColFittingScript, CdcCalColFittingsFrz, CdcCalColSubCapsScript, FlexScript)
AC_Cdc := stack(CdcLever_Script, CdcDosing_Script, CdcManifold_Script, CdcCalCol_Script)
DtoCConnectionScript_Fitting, DtoCElbowbridge_elbows
drawme := stack(CdcCalColFittingsLayer, SelectCdcCalColFittings, DtoCConnectionScript_Fitting, DtoCElbowbridge_elbows, CdcCalColFittingsFrz, CdcCalColPluLayer, SelectCdcCalColPlu, DtoCPipes, CdcCalColPluFrz)
# [component: inputs Flex1]
# Old pipes between the 45 degree elbows in the chlor dosing system
ElbowRadius(ND_DeliveryPipe) = 0.01475 m
SocketDepth(ND_DeliveryPipe) = 0.017 m
# ONLY FOR AUTCAD 2015
ChlorElbowConnectorPipeBottom := PipeF(ChlorDeliveryPipe_Origin + [
    -ElbowRadius(ND_DeliveryPipe) + (L_PVCBallValve + ShortTeeLength(ND_DeliveryPipe) + SocketDepth(ND_DeliveryPipe) + L_ChlorTube + L_PVCBallValve);
    -sin(45 deg)*ElbowRadius(ND_DeliveryPipe);
    sin(45 deg)*ElbowRadius(ND_DeliveryPipe)
], 2*SocketDepth(ND_DeliveryPipe), [45; -90]*deg, ND_DeliveryPipe, SDR_13.5)
L_ChlorBridgeConnectorPipe := ChlorDosingTube_Origin[2] - ChlorDeliveryPipe_Origin[2] - .5*TeeLength(ND_DeliveryPipe) - L_ChlorTube - sin(45 deg)*(4*ElbowRadius(ND_DeliveryPipe) + 4*SocketDepth(ND_DeliveryPipe) + (1 - tan(22.5 deg))*ElbowRadius(ND_DeliveryPipe))
ChlorBridgeConnectorPipe := PipeF(ChlorDeliveryPipe_Origin + [
    ElbowRadius(ND_DeliveryPipe);
    -(sin(45 deg)*(ElbowRadius(ND_DeliveryPipe) + 2*SocketDepth(ND_DeliveryPipe)) + (1 - sin(45 deg))*ElbowRadius(ND_DeliveryPipe));
    sin(45 deg)*(ElbowRadius(ND_DeliveryPipe) + 2*SocketDepth(ND_DeliveryPipe)) + sin(45 deg)*ElbowRadius(ND_DeliveryPipe)
], L_ChlorBridgeConnectorPipe, [0; 90]*deg, ND_DeliveryPipe, SDR_13.5)
ChlorElbowConnectorPipeTop := PipeF(ChlorDosingTube_Origin + [
    -L_DosingConnectors - ShortTeeLength(ND_DeliveryPipe) - SocketDepth(ND_DeliveryPipe);
    -sin(45 deg)*(2*SocketDepth(ND_DeliveryPipe) + (1 - tan(22.5 deg))*ElbowRadius(ND_DeliveryPipe)) - (1 - sin(45 deg))*ElbowRadius(ND_DeliveryPipe);
    -.5*TeeLength(ND_DeliveryPipe) - L_ChlorTube - sin(45 deg)*(2*SocketDepth(ND_DeliveryPipe) + (1 - tan(22.5 deg))*ElbowRadius(ND_DeliveryPipe) + ElbowRadius(ND_DeliveryPipe))
], 2*SocketDepth(ND_DeliveryPipe) + (1 - tan(22.5 deg))*ElbowRadius(ND_DeliveryPipe), [-45; 90]*deg, ND_DeliveryPipe, SDR_13.5)
