Q_Plant := 40*L/s
# [reference: ExpertInputs.xmcd]
# [reference: MathFunctions.xmcd]
# [reference: PipeDatabase.xmcd]
# [reference: MaterialsDatabase.xmcd]
# [reference: FluidsFunctions.xmcd]
# [reference: SedTankFunctions.xmcd]
# [reference: CdcFunctions.xmcd]
# [reference: LfomFunctions.xmcd]
# [reference: SedimentationTank.xmcd]
# [reference: Flocculator.xmcd]
# [reference: LFOM.xmcd]
# [reference: EntranceTank_zy52.xmcd]
# [reference: StackedRapidSandFilter.xmcd]
# [reference: LinearCdc.xmcd]
# [reference: ChemStorageTanks.xmcd]
# AutoCAD drawing programs:
# Translators:
# These are the codes that take MathCAD outputs and create AutoCAD scripts that are used to draw the plant (formerly Basics)
# [reference: MtoATranslators.xmcd]
# The wrapped MtoA translator contains the functions that the user will want to access. These functions will draw pieces with full functionality - specifying the location, dimension, and orientation of the object. Also, it contains layer control and subtraction capabilities for grouped objects.
# [reference: MtoATranslatorsWrapped.xmcd]
# Drawing functions:
# [reference: ChannelF.xmcd]
# [reference: PlumbingF.xmcd]
# [reference: TankF.xmcd]
# [reference: StairsF.xmcd]
# [reference: DrainChannelF.xmcd]
# AutoCAD Script Files:
# [reference: FlocculatorAC.xmcd]
# [reference: SedimentationTankAC.xmcd]
# [reference: EntranceTankAC.xmcd]
# [reference: ChemStockTanksAC.xmcd]
# [reference: StackedRapidSandFilterAC.xmcd]
# [reference: CdcAC.xmcd]
# [reference: OperatorAccessAC.xmcd]
# [reference: MaterialsAC.xmcd]
# new drawing includes design changes from spring 2013
# Width and length of the chemical platform are defined in ChemStockTanksAC
ChemPlatform_Origin := [
    CoagTank_Origin[0] + R_CoagTank + T_ChemTankWall + S_ChemTankBorder - L_EtChemPlatform;
    Et_Origin[1] + W_Et + T_PlantWall - W_EtChemPlatform;
    CoagTank_Origin[2] - T_ChemTankWall - T_PlantWall
]
ChemPlatform_Dimensions := [L_EtChemPlatform; W_EtChemPlatform; T_PlantWall]
# Chemical Dose Controller
# Dimensions
# Length of the float pipe must fill both caps plus some.
L_CdcFloat := 2*(CapHeight(ND_EtFloat) - CapThickness(ND_EtFloat)) + 1 in
Z_FloatTop := ZW_Et - HL_Flowmeasure + 1/2*L_CdcFloat + CapThickness(ND_EtFloat)
# The elevation of the float with the center of the float being at the bottom row of orifices of the LFOM.
L_Cable := Z_EtTop + H_LeverHole - Z_FloatTop
# five gallons bucket dimensions for constant head tanks
D_CHT := 30 cm
H_CHT := 37 cm
T_CHTwall := 1 cm
ND_DeliveryPipe := 1 in  # based on measurements in the lab and the system in Atima
PS_FlexTube := 2
L_PVCBallValve := .1625 m/2
B_DosingTubes := max(TeeLength(ND_DeliveryPipe) + 2*SocketDepth(ND_DeliveryPipe), 2*ElbowRadius(ND_DeliveryPipe) + 2*SocketDepth(ND_DeliveryPipe))
T_MountingBoard := 1.5 in
L_CoagDeliveryPipe := L_CdcCoagTube + 2*L_PVCBallValve + 2*ShortTeeLength(ND_DeliveryPipe) + ElbowRadius(ND_DeliveryPipe) + ConRadius(ND_DeliveryPipe)
L_ChlorineDeliveryPipe := L_CdcChlorineTube + 2*L_PVCBallValve + 2*ShortTeeLength(ND_DeliveryPipe) + ElbowRadius(ND_DeliveryPipe) + ConRadius(ND_DeliveryPipe)
L_DosingConnectors := L_PVCBallValve + SocketDepth(ND_DeliveryPipe)
# Origin Points
LA_Origin := [
    Et_Origin[0] - L_Et + S_EtFloat + ConRadius(ND_EtFloat);
    Et_Origin[1] + ConRadius(ND_EtFloat) + S_EtFloat/2 - L_CdcLever;
    Z_EtTop + D_LABOrigintoLAOriginZ/2
] = [-7.2686; 5.71867; 2.56896] m
LA2_Origin := [LA_Origin[0] - ConRadius(ND_EtFloat) - S_EtFloat/2; LA_Origin[1]; LA_Origin[2]]
LADt_Center := [
    LA_Origin[0] - L_LAOriginToDtCenterX;
    LA_Origin[1] - L_LAOriginToDtY/2;
    LA_Origin[2] + L_LAOriginToDtZ + H_LeverArm
]
LA2Dt_Center := [
    LA2_Origin[0] - L_LAOriginToDtCenterX;
    LA2_Origin[1] - L_LAOriginToDtY/2;
    LA2_Origin[2] + L_LAOriginToDtZ + H_LeverArm
]
CHT_Origin := [
    ChemPlatform_Origin[0] + 5/6*L_EtChemPlatform;
    ChemPlatform_Origin[1] - 1/2*D_CHT - T_MountingBoard;
    Z_CdcFloatValveOrifice
] = [-9.0402; 4.53047; 2.67396] m
CHT2_Origin := [CHT_Origin[0] - 1.5*D_CHT; CHT_Origin[1]; CHT_Origin[2]]
Float_Origin := [LA_Origin[0]; LA_Origin[1] + W_LeverArm/2 + L_CdcLever; Z_FloatTop - CapThickness(ND_EtFloat)] = [-7.2686; 6.17027; 2.42215] m
Slider1_Origin := [
    LA_Origin[0] - H_Slider + W_Slider;
    LA_Origin[1] - L_LAOriginToDtY/2 - H_Slider;
    LA_Origin[2] + H_LeverArm + W_Slider
] = [-7.28127; 5.31219; 2.59756] m
Slider2_Origin := [
    LA2_Origin[0] - H_Slider + W_Slider;
    LA2_Origin[1] - L_LAOriginToDtY/2 - H_Slider;
    LA2_Origin[2] + H_LeverArm + W_Slider
] = [-7.44954; 5.31219; 2.59756] m
CoagDeliveryPipe_Origin := [
    Et_Origin[0] - L_Et + L_CoagDeliveryPipe;
    Et_Origin[1] - T_PlantWall - ConRadius(ND_DeliveryPipe);
    Et_Origin[2]
]
ShortTeeLength(ND_DeliveryPipe) - ElbowRadius(ND_DeliveryPipe) + SocketDepth(ND_DeliveryPipe)
Et_Origin = [-3.23047; 6.0004; 1.75626] m
CoagDosingTube_Origin := CoagDeliveryPipe_Origin + [
    -L_PVCBallValve - SocketDepth(ND_DeliveryPipe);
    0 m;
    ElbowRadius(ND_DeliveryPipe) + 2*SocketDepth(ND_DeliveryPipe) + .5*TeeLength(ND_DeliveryPipe)
]
LA_Origin = [-7.2686; 5.71867; 2.56896] m
LA_Origin[0] + 2*S_Fitting + L_ChlorineDeliveryPipe + ConRadius(ND_DeliveryPipe) + ElbowRadius(ND_DeliveryPipe)
ChlorDeliveryPipe_Origin := [
    Et_Origin[0] - L_Et + L_ChlorineDeliveryPipe;
    Et_Origin[1] - T_PlantWall - ConRadius(ND_DeliveryPipe);
    CoagDosingTube_Origin[2] + (N_CdcCoagTubes + 1)*B_DosingTubes + S_Fitting + 2*ConRadius(ND_DeliveryPipe)
]
ChlorDosingTube_Origin := ChlorDeliveryPipe_Origin + [
    -L_PVCBallValve - SocketDepth(ND_DeliveryPipe);
    0 m;
    ElbowRadius(ND_DeliveryPipe) + 2*SocketDepth(ND_DeliveryPipe) + .5*TeeLength(ND_DeliveryPipe)
]
# Lever Arms and Drop Tubes
L_CdcLever = 0.45 m
MakeCdcLayer := layer_new("CdcLayer", black)
LArm1 := BoxF([LA_Origin[0] + 1/8*in; LA_Origin[1] - L_CdcLever; LA_Origin[2]], [LA_Origin[0]; LA_Origin[1] + L_CdcLever; LA_Origin[2] + H_LeverArm], [0; 0; 0]*deg)
DropTube1 := PipeF(LADt_Center, L_DropTube, [0; -90]*deg, ND_DropTube, PS_Modules)
L_LBracket = 0.0381 m
LBracketLA1 := LBracket2F([
    LA_Origin[0] - L_LArmBar/2;
    LA_Origin[1] + L_LArmBar/2;
    LA_Origin[2] + L_LBracket/2 - L_LBracket/8 - 3/4*L_LBracket
], W_LBracket, L_LBracket, T_LBracket, [-90; 0; 0]*deg)
LArm2 := BoxF([LA2_Origin[0] + 1/8*in; LA2_Origin[1] - L_CdcLever; LA2_Origin[2]], [LA2_Origin[0]; LA2_Origin[1] + L_CdcLever; LA2_Origin[2] + H_LeverArm], [0; 0; 0]*deg)
DropTube2 := PipeF(LA2Dt_Center, L_DropTube, [0; -90]*deg, ND_DropTube, PS_Modules)
LBracketLA2 := LBracket2F([
    LA2_Origin[0] - L_LArmBar/2;
    LA2_Origin[1] + L_LArmBar/2;
    LA_Origin[2] + L_LBracket/2 - L_LBracket/8 - 3/4*L_LBracket
], W_LBracket, L_LBracket, T_LBracket, [-90; 0; 0]*deg)
FreezeCdcLayer := FreezeLayer("CdcLayer")
LeverArmCHT2_Script := stack(MakeCdcLayer, LArm1, LArm2, DropTube1, DropTube2, LBracketLA1, LBracketLA2, FreezeCdcLayer)
LeverArmCHT1_Script := stack(MakeCdcLayer, LArm1, DropTube1, LBracketLA1, FreezeCdcLayer)
# Connecting bars, Cylinders and Float Cable
ConnectCylinderLayer := layer_new("CdcConnectCylinder", ltgrey)
LarmBar1 := CylinderSUBF([
    LA_Origin[0] + L_LArmBar/2;
    (LA_Origin[1] + L_LArmBar/2) - W_LBracket/2;
    LA_Origin[2] + L_LBracket/2
], R_LArmBar, L_LArmBar, [0; 0]*deg, ["CdcLayer"])
# lambars are the bars that connect the lever arms to the L-brackets
LarmBar2 := CylinderSUBF([
    LA2_Origin[0] + L_LArmBar/2;
    (LA2_Origin[1] + L_LArmBar/2) - W_LBracket/2;
    LA2_Origin[2] + L_LBracket/2
], R_LArmBar, L_LArmBar, [0; 0]*deg, ["CdcLayer"])
ConnectionCylinder2 := CylinderSUBF([LA_Origin[0] + H_LeverArm; LA2_Origin[1] + L_CdcLever - 4*zc; LA_Origin[2] + 4*W_LeverArm], D_Cable, .5*L_CdcLever, [0; 0]*deg, ["CdcLayer"])
FloatCable := CylinderF([LA_Origin[0]; LA_Origin[1] + W_LeverArm/2 + L_CdcLever; Z_FloatTop], D_Cable, L_Cable, [0; 90]*deg)
FreezeConnectCylinderLayer := FreezeLayer("CdcConnectCylinder")
ConnectCyl2_Script := stack(ConnectCylinderLayer, LarmBar1, LarmBar2, ConnectionCylinder2, FloatCable, FreezeConnectCylinderLayer)
ConnectCyl1_Script := stack(ConnectCylinderLayer, LarmBar1, FloatCable, FreezeConnectCylinderLayer)
# Sliders
SliderLayer := layer_new("CdcSliders", dkgrey)
Slider2FirstSide := BoxF(Slider2_Origin, [Slider2_Origin[0] + L_Slider; Slider2_Origin[1] + W_Slider; Slider2_Origin[2] - H_Slider], [90; 0; 0]*deg)
Slider1FirstSide := BoxF(Slider1_Origin, [Slider1_Origin[0] + L_Slider; Slider1_Origin[1] + W_Slider; Slider1_Origin[2] - H_Slider], [90; 0; 0]*deg)
Slider1TopSide := BoxF(Slider1_Origin, [Slider1_Origin[0] + H_Slider; Slider1_Origin[1] + L_Slider; Slider1_Origin[2] - W_Slider], [0; 0; 0]*deg)
Slider2TopSide := BoxF(Slider2_Origin, [Slider2_Origin[0] + H_Slider; Slider2_Origin[1] + L_Slider; Slider2_Origin[2] - W_Slider], [0; 0; 0]*deg)
Slider2SecondSide := BoxF([Slider2_Origin[0] + H_Slider; Slider2_Origin[1]; Slider2_Origin[2]], [
    Slider2_Origin[0] + H_Slider + W_Slider;
    Slider2_Origin[1] + L_Slider;
    Slider2_Origin[2] - H_Slider
], [0; 0; 0]*deg)
Slider1SecondSide := BoxF([Slider1_Origin[0] + H_Slider; Slider1_Origin[1]; Slider1_Origin[2]], [
    Slider1_Origin[0] + H_Slider + W_Slider;
    Slider1_Origin[1] + L_Slider;
    Slider1_Origin[2] - H_Slider
], [0; 0; 0]*deg)
FreezeSliders := FreezeLayer("CdcSliders")
Sliders2_Script := stack(SliderLayer, Slider1FirstSide, Slider2FirstSide, Slider1TopSide, Slider2TopSide, Slider1SecondSide, Slider2SecondSide, FreezeSliders)
Sliders1_Script := stack(SliderLayer, Slider1FirstSide, Slider1TopSide, Slider1SecondSide, FreezeSliders)
FloatCapsLayer := layer_new("CdcFloatCapPlu", green)
CdcFloatCapTop := CapF(Float_Origin, [0; -90]*deg, ND_EtFloat)
CdcFloatCapBottom := CapF([Float_Origin[0]; Float_Origin[1]; Float_Origin[2] - L_CdcFloat], [0; 90]*deg, ND_EtFloat)
FreezeFloatCaps := FreezeLayer("CdcFloatCapPlu")
FloatPipeLayer := layer_new("CdcFloatPipePlu", blue)
CdcFloatPipe := PipeF(Float_Origin, L_CdcFloat, [0; -90]*deg, ND_EtFloat, PS_Default)
FreezeFloatPipe := FreezeLayer("CdcFloatPipePlu")
PlumbingLayer := stack(FloatCapsLayer, CdcFloatCapTop, CdcFloatCapBottom, FreezeFloatCaps, FloatPipeLayer, CdcFloatPipe, FreezeFloatPipe)
# Float!
Cdc2_Script := stack(LeverArmCHT2_Script, ConnectCyl2_Script, Sliders2_Script, PlumbingLayer)
Cdc1_Script := stack(LeverArmCHT1_Script, ConnectCyl1_Script, Sliders1_Script, PlumbingLayer)
# Manifold
CoagManifoldPluLayer := layer_new("CoagManifoldPlu", blue)
CoagConnectorPipe := PipeF(CoagDosingTube_Origin + [L_DosingConnectors + ShortTeeLength(ND_DeliveryPipe); 0 m; 0.5*TeeLength(ND_DeliveryPipe)], 2*SocketDepth(ND_DeliveryPipe), [0; 90]*deg, ND_DeliveryPipe, PS_Default)
ArrayCoagConnectorPipe := ArrayLast(N_CdcCoagTubes + 1, 1, B_DosingTubes)
MirrorCoagConnectorPipe := Mirror3dAll("yz", [
    CoagDosingTube_Origin[0] - .5*L_CdcCoagTube;
    CoagDosingTube_Origin[1];
    CoagDosingTube_Origin[2] + 1/4*H_Et + ShortTeeLength(ND_DeliveryPipe) + .5*ND_DeliveryPipe
], "n")
CoagDeliveryConnectorPipe := PipeF(CoagDosingTube_Origin + [
    L_DosingConnectors + ShortTeeLength(ND_DeliveryPipe);
    0 m;
    -0.5*TeeLength(ND_DeliveryPipe) - 2*SocketDepth(ND_DeliveryPipe)
], 2*SocketDepth(ND_DeliveryPipe), [0; 90]*deg, ND_DeliveryPipe, PS_Default)
CoagDeliveryPipe := PipeF(CoagDeliveryPipe_Origin, L_CoagDeliveryPipe, [0; 0]*deg, ND_DeliveryPipe, PS_Default)
FreezeCoagManifoldPlu := FreezeLayer("CoagManifoldPlu")
ChlorManifoldPluLayer := layer_new("ChlorManifoldPlu", blue)
ChlorConnectorPipe := PipeF(ChlorDosingTube_Origin + [L_DosingConnectors + ShortTeeLength(ND_DeliveryPipe); 0 m; 0.5*TeeLength(ND_DeliveryPipe)], 2*SocketDepth(ND_DeliveryPipe), [0; 90]*deg, ND_DeliveryPipe, PS_Default)
ArrayChlorConnectorPipe := ArrayLast(N_CdcChlorineTubes + 1, 1, B_DosingTubes)
MirrorChlorConnectorPipe := Mirror3dAll("yz", [
    ChlorDosingTube_Origin[0] - .5*L_CdcChlorineTube;
    ChlorDosingTube_Origin[1];
    ChlorDosingTube_Origin[2] + 1/4*H_Et + ShortTeeLength(ND_DeliveryPipe) + .5*ND_DeliveryPipe
], "n")
ChlorDeliveryConnectorPipe := PipeF(ChlorDosingTube_Origin + [
    L_DosingConnectors + ShortTeeLength(ND_DeliveryPipe);
    0 m;
    -0.5*TeeLength(ND_DeliveryPipe) - 2*SocketDepth(ND_DeliveryPipe)
], 2*SocketDepth(ND_DeliveryPipe), [0; 90]*deg, ND_DeliveryPipe, PS_Default)
ChlorineDeliveryPipe := PipeF(ChlorDeliveryPipe_Origin, L_ChlorineDeliveryPipe, [0; 0]*deg, ND_DeliveryPipe, PS_Default)
FreezeChlorManifoldPlu := FreezeLayer("ChlorManifoldPlu")
ManifoldFittingsLayer := layer_new("CdcManifoldFittings", green)
ElbowCoagCHT := ElbowF(CoagDeliveryPipe_Origin + [-L_CoagDeliveryPipe; 0 m; 0 m], [90; 0; -90]*deg, ND_DeliveryPipe, PS_Default)
ElbowChlorCHT := ElbowF(ChlorDeliveryPipe_Origin + [-L_ChlorineDeliveryPipe; 0 m; 0 m], [90; 0; -90]*deg, ND_DeliveryPipe, PS_Default)
ElbowCoagDosing := ElbowF(CoagDeliveryPipe_Origin, [-90; 0; 90]*deg, ND_DeliveryPipe, PS_Default)
ElbowChlorDosing := ElbowF(ChlorDeliveryPipe_Origin, [-90; 0; 90]*deg, ND_DeliveryPipe, PS_Default)
# Option 1:Eliminate the top right elbow and modify the tee code and add a ball valve on top
# option 2: replace the top right elbow with a tee and ball valve without changing the tee code
ElbowCoagDosingBottomLeft := ElbowF(CoagDosingTube_Origin + [-L_CdcCoagTube - L_DosingConnectors; 0 m; 0 m], [90; 0; -90]*deg, ND_DeliveryPipe, PS_Default)
ElbowChlorDosingBottomLeft := ElbowF(ChlorDosingTube_Origin + [-L_CdcChlorineTube - L_DosingConnectors; 0 m; 0 m], [90; 0; -90]*deg, ND_DeliveryPipe, PS_Default)
ElbowCoagDosingTopRight := ElbowF(CoagDosingTube_Origin + [L_DosingConnectors; 0 m; B_DosingTubes*max(N_CdcCoagTubes - 1, 1)], [-90; 0; -90]*deg, ND_DeliveryPipe, PS_Default)
TeeCoagDosingTopRight := TeeF(CoagDosingTube_Origin + [L_DosingConnectors; 0 m; B_DosingTubes*N_CdcCoagTubes], [90; 0; -90]*deg, ND_DeliveryPipe, PS_Default)
ElbowChlorDosingTopRight := ElbowF(ChlorDosingTube_Origin + [L_DosingConnectors; 0 m; B_DosingTubes*max(N_CdcChlorineTubes - 1, 1)], [-90; 0; -90]*deg, ND_DeliveryPipe, PS_Default)
TeeChlorDosingTopRight := TeeF(ChlorDosingTube_Origin + [L_DosingConnectors; 0 m; B_DosingTubes*N_CdcChlorineTubes], [90; 0; -90]*deg, ND_DeliveryPipe, PS_Default)
FreezeFittings := FreezeLayer("CdcManifoldFittings")
ManifoldCoagTeeLayer := layer_new("CdcCoagTees", green)
CoagTees :=
    CoagTeeStack ← layer_new("CdcCoagTees", green)
    for i ∈ 0 .. max(N_CdcCoagTubes - 1, 0)
        CoagTeeStack ← stack(CoagTeeStack, TeeF(CoagDosingTube_Origin + [L_DosingConnectors; 0 m; B_DosingTubes*i], [90; 0; 90]*deg, ND_DeliveryPipe, PS_Default))
        CoagTeeStack ← stack(CoagTeeStack, TeeF(CoagDosingTube_Origin + [-L_CdcCoagTube - L_DosingConnectors; 0 m; B_DosingTubes*(i + 1)], [-90; 0; 90]*deg, ND_DeliveryPipe, PS_Default))
        i ← i + 1
    return CoagTeeStack
# Changed from N.CdcCoagTubes-2 to N.CdcCoagTubes-1
FreezeCoagTees := FreezeLayer("CdcCoagTees")
ChlorTees :=
    ChlorTeeStack ← layer_new("CdcChlorTees", green)
    for i ∈ 0 .. max(N_CdcChlorineTubes - 1, 0)
        ChlorTeeStack ← stack(ChlorTeeStack, TeeF(ChlorDosingTube_Origin + [L_DosingConnectors; 0 m; B_DosingTubes*i], [90; 0; 90]*deg, ND_DeliveryPipe, PS_Default))
        ChlorTeeStack ← stack(ChlorTeeStack, TeeF(ChlorDosingTube_Origin + [-L_CdcChlorineTube - L_DosingConnectors; 0 m; B_DosingTubes*(i + 1)], [-90; 0; 90]*deg, ND_DeliveryPipe, PS_Default))
        i ← i + 1
    return ChlorTeeStack
L_DosingConnectors = 0.10825 m
FreezeChlorTees := FreezeLayer("CdcChlorTees")
L_PVCBallValve = 0.08125 m
ChlorDosingTube_Origin + [L_DosingConnectors; 0 m; B_DosingTubes*1] = [-6.37912; 5.83056; 2.62715] m
ChlorDosingTube_Origin = [-6.48737; 5.83056; 2.49695] m
ManifoldCoagValveLayer := layer_new("CdcCoagManifoldValves", ltgrey)
CdcCoagBallValve := insertdwg("https://confluence.cornell.edu/download/attachments/173604905/PvcBallValve+Scaled.dwg", CoagDosingTube_Origin + [L_PVCBallValve; 0 m; 0 m], ND_DeliveryPipe/(2 in), ND_DeliveryPipe/(2 in), 0 deg)
RotateCdcCoagBallValve := Rotate3DLast(CoagDosingTube_Origin + [L_PVCBallValve; 0 m; 0 m], "y", -90 deg)
ArrayCoagBallValve := ArrayLast(N_CdcCoagTubes + 1, 1, B_DosingTubes)
MirrorCoagValves := Mirror3dAll("yz", [
    CoagDosingTube_Origin[0] - .5*L_CdcCoagTube;
    CoagDosingTube_Origin[1];
    CoagDosingTube_Origin[2] + 1/4*H_Et + ShortTeeLength(ND_DeliveryPipe) + .5*ND_DeliveryPipe
], "n")
CdcCoagBallValveAir := insertdwg("https://confluence.cornell.edu/download/attachments/173604905/PvcBallValve+Scaled.dwg", CoagDosingTube_Origin + [
    L_PVCBallValve + ShortTeeLength(ND_DeliveryPipe) + SocketDepth(ND_DeliveryPipe);
    0 m;
    (N_CdcCoagTubes + 1)*TeeLength(ND_DeliveryPipe) + ((2*N_CdcCoagTubes + 1)*SocketDepth(ND_DeliveryPipe)) - ShortTeeLength(ND_DeliveryPipe)
], ND_DeliveryPipe/(2 in), ND_DeliveryPipe/(2 in), 90 deg)
FreezeCoagValvesLayer := FreezeLayer("CdcCoagManifoldValves")
ManifoldChlorValveLayer := layer_new("CdcChlorManifoldValves", ltgrey)
CdcChlorineBallValve := insertdwg("https://confluence.cornell.edu/download/attachments/173604905/PvcBallValve+Scaled.dwg", ChlorDosingTube_Origin + [L_PVCBallValve; 0 m; 0 m], ND_DeliveryPipe/(2 in), ND_DeliveryPipe/(2 in), 0 deg)
RotateCdcChlorineBallValve := Rotate3DLast(ChlorDosingTube_Origin + [L_PVCBallValve; 0 m; 0 m], "y", -90 deg)  # Chlorine ball valves not showing up --> done
# All the choosing between max(N-1,1) are changed to N+1 to ensure that an extra tube is drawn in all cases. But some indices may have been messed up
ArrayChlorineBallValve := ArrayLast(N_CdcChlorineTubes + 1, 1, B_DosingTubes)
# There is an extra tee being drawn on the top right side for both chlorine and coagulant, need to figure out how to get rid of it --> done
MirrorChlorineValves := Mirror3dAll("yz", [
    ChlorDosingTube_Origin[0] - .5*L_CdcChlorineTube;
    ChlorDeliveryPipe_Origin[1];
    ChlorDeliveryPipe_Origin[2]
], "n")
CdcChlorineBallValveAir := insertdwg("https://confluence.cornell.edu/download/attachments/173604905/PvcBallValve+Scaled.dwg", ChlorDosingTube_Origin + [
    L_PVCBallValve + ShortTeeLength(ND_DeliveryPipe) + SocketDepth(ND_DeliveryPipe);
    0 m;
    (N_CdcChlorineTubes + 1)*TeeLength(ND_DeliveryPipe) + ((2*N_CdcChlorineTubes + 1)*SocketDepth(ND_DeliveryPipe)) - ShortTeeLength(ND_DeliveryPipe)
], ND_DeliveryPipe/(2 in), ND_DeliveryPipe/(2 in), 90 deg)
FreezeChlorValvesLayer := FreezeLayer("CdcChlorManifoldValves")
ViewFront := view("f")
# Air removal ball valves position not right
ManifoldFitting_Script := stack(CoagManifoldPluLayer, CoagConnectorPipe, ViewFront, ArrayCoagConnectorPipe, MirrorCoagConnectorPipe, ViewTop, CoagDeliveryConnectorPipe, CoagDeliveryPipe, FreezeCoagManifoldPlu, ChlorManifoldPluLayer, ChlorConnectorPipe, ViewFront, ArrayChlorConnectorPipe, MirrorChlorConnectorPipe, ViewTop, ChlorDeliveryConnectorPipe, ChlorineDeliveryPipe, FreezeChlorManifoldPlu, ManifoldFittingsLayer, ElbowCoagCHT, ElbowChlorCHT, ElbowCoagDosing, ElbowChlorDosing, TeeCoagDosingTopRight, TeeChlorDosingTopRight, ElbowCoagDosingBottomLeft, ElbowChlorDosingBottomLeft, FreezeFittings, CoagTees, FreezeCoagTees, ChlorTees, FreezeChlorTees)
ManifoldValve_Script := stack(ManifoldCoagValveLayer, CdcCoagBallValve, RotateCdcCoagBallValve, ViewFront, ArrayCoagBallValve, MirrorCoagValves, ViewTop, CdcCoagBallValveAir, FreezeCoagValvesLayer, ManifoldChlorValveLayer, ViewTop, CdcChlorineBallValve, RotateCdcChlorineBallValve, ViewFront, ArrayChlorineBallValve, MirrorChlorineValves, ViewTop, CdcChlorineBallValveAir, FreezeChlorValvesLayer)
Manifold_Script := stack(ManifoldFitting_Script, ManifoldValve_Script)
# [component: inputs Manifold_Script]
# Dosing Tubes
L_CdcCoagTube = 3.91504 m
D_CdcCoag = 0.1875 in
N_CdcCoagTubes = 2
L_CdcChlorineTube = 0.811102 m
D_CdcChlorine = 0.125 in
N_CdcChlorineTubes = 2
DosingTubesLayer := layer_new("CdcDosingPlu", red)
CoagTube := PipeF(CoagDosingTube_Origin, L_CdcCoagTube, [0; 0]*deg, D_CdcCoag, PS_FlexTube)
ViewFront := view("f")
ArrayCoagTube := ArrayLast(max(N_CdcCoagTubes, 2), 1, B_DosingTubes)
ArrayCoagTube_test := ArrayLast(N_CdcCoagTubes + 1, 1, B_DosingTubes)
ViewTop := view("t")
ChlorineTube := PipeF(ChlorDosingTube_Origin, L_CdcChlorineTube, [0; 0]*deg, D_CdcChlorine, PS_FlexTube)
ArrayChlorineTube := ArrayLast(max(N_CdcChlorineTubes, 2), 1, B_DosingTubes)
ArrayChlorineTube_test := ArrayLast(N_CdcChlorineTubes + 1, 1, B_DosingTubes)
FreezeDosingTubes := FreezeLayer("CdcDosingPlu")
Dosing_Script := stack(DosingTubesLayer, CoagTube, ViewFront, ArrayCoagTube_test, ViewTop, ChlorineTube, ViewFront, ArrayChlorineTube_test, ViewTop, FreezeDosingTubes)
# [component: inputs Dosing_Script]
Component_Script := stack(Manifold_Script, Dosing_Script, AC_EntranceTank)
# [component: inputs Component_Script]
Dosing_Script :=
    stack(DosingTubesLayer, CoagTube, ChlorineTube, FreezeDosingTubes) if N_CdcCoagTubes == 1 and N_CdcChlorineTubes == 1
    stack(DosingTubesLayer, CoagTube, ChlorineTube, ViewFront, ArrayChlorineTube, ViewTop, FreezeDosingTubes) if N_CdcCoagTubes == 1 and N_CdcChlorineTubes ≠ 1
    stack(DosingTubesLayer, CoagTube, ViewFront, ArrayCoagTube, ViewTop, ChlorineTube, FreezeDosingTubes) if N_CdcCoagTubes ≠ 1 and N_CdcChlorineTubes == 1
    stack(DosingTubesLayer, CoagTube, ViewFront, ArrayCoagTube, ViewTop, ChlorineTube, ViewFront, ArrayChlorineTube, ViewTop, FreezeDosingTubes) otherwise
# Calibration Column Definitions
SF_CalCol := 1.25
Ti_Res := 1.25*min
H_CalCol := 30 cm
Q_CoagCalColMax := SF_CalCol*Q_CoagStock
Vol_CoagCalCol := Ti_Res*Q_CoagCalColMax
D_inCoagCCMin := sqrt(4*Vol_CoagCalCol/(π*H_CalCol)) = 2.22122 in
ND_CoagCalCol := NominalDiameter(D_inCoagCCMin, PS_Default)
D_inCoagCalCol := innerdiameter(ND_CoagCalCol, PS_Default) = 3.21 in
Q_ChlorCalColMax := SF_CalCol*Q_ChlorineStock
Vol_ChlorCalCol := Ti_Res*Q_ChlorCalColMax
D_inChlorCCMin := sqrt(4*Vol_ChlorCalCol/(π*H_CalCol)) = 1.28242 in
ND_ChlorCalCol := NominalDiameter(D_inChlorCCMin, PS_Default)
D_inChlorCalCol := innerdiameter(ND_ChlorCalCol, PS_Default) = 1.734 in
Q_FCCalColMax := SF_CalCol*Q_FiCoagStock
Vol_FCCalCol := Ti_Res*Q_FCCalColMax
D_inFCCCMin := sqrt(4*Vol_FCCalCol/(π*H_CalCol)) = 0.192363 in
ND_FCCalCol := NominalDiameter(D_inFCCCMin, PS_Default)
D_inFCCalCol := innerdiameter(ND_FCCalCol, PS_Default) = 1.175 in
R_Cylinder := .5 cm
# Calibration Column Origin Points
CoagCalCol_Origin := [
    ChemPlatform_Origin[0] + 1/2*L_EtChemPlatform;
    ChemPlatform_Origin[1] - ConRadius(ND_CoagCalCol) - T_MountingBoard;
    Z_CoagulantOutlet
]
CoagTopCap_Origin := [CoagCalCol_Origin[0]; CoagCalCol_Origin[1]; CoagCalCol_Origin[2] + H_CalCol]
ChlorCalCol_Origin := [
    ChemPlatform_Origin[0] + 1/2*L_EtChemPlatform - ConRadius(ND_CoagCalCol) - ConRadius(ND_ChlorCalCol) - 2*zc;
    ChemPlatform_Origin[1] - ConRadius(ND_CoagCalCol) - 2*zc;
    Z_CoagulantOutlet
]
ChlorTopCap_Origin := [ChlorCalCol_Origin[0]; ChlorCalCol_Origin[1]; ChlorCalCol_Origin[2] + H_CalCol]
# To draw the hole in the top cap, we are subtracting a cylinder from the top cap layer
CoagCylinder_Origin := [CoagCalCol_Origin[0]; CoagCalCol_Origin[1]; CoagCalCol_Origin[2] + H_CalCol/2]
ChlorCylinder_Origin := [ChlorCalCol_Origin[0]; ChlorCalCol_Origin[1]; ChlorCalCol_Origin[2] + H_CalCol/2]
MakeCalColLayer := layer_new("CdcCalColumnPlu", ltpurple)
MainCoagCalCol := PipeF(CoagCalCol_Origin, H_CalCol, [0; 90]*deg, ND_CoagCalCol, PS_Default)
MainChlorCalCol := PipeF(ChlorCalCol_Origin, H_CalCol, [0; 90]*deg, ND_ChlorCalCol, PS_Default)
CHT1 := ConstantHeadTankF(CHT_Origin, [90; 0; 90]*deg, D_CHT/2, H_CHT, T_CHTwall, .75*H_CHT, 1 in, 1 in, 1 in, 1 in)
CHT2 := ConstantHeadTankF(CHT2_Origin, [90; 0; 90]*deg, D_CHT/2, H_CHT, T_CHTwall, .75*H_CHT, 1 in, 1 in, 1 in, 1 in)
FreezeCalCol := FreezeLayer("CdcCalColumnPlu")
MakeCapsLayer := layer_new("CdcColumnCapsPlu", blue2)
CoagTopCap := CapF(CoagTopCap_Origin, [0; -90]*deg, ND_CoagCalCol)
CoagBottomCap := CapF(CoagTopCap_Origin - [0 m; 0 m; H_CalCol], [0; 90]*deg, ND_CoagCalCol)
ChlorTopCap := CapF(ChlorTopCap_Origin, [0; -90]*deg, ND_ChlorCalCol)
ChlorBottomCap := CapF(ChlorTopCap_Origin - [0 m; 0 m; H_CalCol], [0; 90]*deg, ND_ChlorCalCol)
FreezeCapsLayer := FreezeLayer("CdcColumnCapsPlu")
DrawCoagCylinder := CylinderF(CoagCylinder_Origin, R_Cylinder, H_CalCol, [0; 90]*deg)
DrawChlorCylinder := CylinderF(ChlorCylinder_Origin, R_Cylinder, H_CalCol, [0; 90]*deg)
LayCylinder := GroupAll("DeleteMe")
MakeHole := SubtractF(["CdcColumnCapsPlu"], "DeleteMe")
LayStand := layer_new("CdcCalColumnStand", yellow)
BoardDim_Vert := [
    2*ConRadius(ND_CoagCalCol) + 2*ConRadius(ND_ChlorCalCol) + 4*zc + 2*D_CHT + 1/6*L_EtChemPlatform;
    T_MountingBoard;
    H_CalCol + Z_CoagulantOutlet - Z_CdcFloatValveOrifice
]
BoardDim_Horiz := [BoardDim_Vert[0]; BoardDim_Vert[2]/(2*tan(60*deg)); 1.5*in]
VertBoard_Origin := [
    CoagCalCol_Origin[0] - ConRadius(ND_CoagCalCol) - 2*ConRadius(ND_ChlorCalCol) - 2*zc;
    CoagCalCol_Origin[1] + ConRadius(ND_CoagCalCol);
    Z_CdcFloatValveOrifice
]
FarCorner_VertBoard := BoardDim_Vert + VertBoard_Origin
HorizBoard_Origin := [
    VertBoard_Origin[0];
    VertBoard_Origin[1] + BoardDim_Vert[1];
    ChemPlatform_Origin[2] + ChemPlatform_Dimensions[2]
]
FarCorner_HorizBoard := BoardDim_Horiz + HorizBoard_Origin
BoardDim_Slant := [BoardDim_Vert[0]; 1.5 in; BoardDim_Vert[2]/(2*sin(60 deg))]
SlantBoard_Origin := FarCorner_HorizBoard
FarCorner_SlantBoard := SlantBoard_Origin + [-BoardDim_Slant[0]; -BoardDim_Slant[1]; BoardDim_Slant[2]]
MakeSlantBoard := BoxF(SlantBoard_Origin, FarCorner_SlantBoard, [0; 0; 30]*deg)
MakeVertBoard := BoxF(VertBoard_Origin, FarCorner_VertBoard, [0; 0; 0])
MakeHorizBoard := BoxF(HorizBoard_Origin, FarCorner_HorizBoard, [0; 0; 0])
RotateSupport := Rotate_All(VertBoard_Origin, 90 deg)
MoveSupport := MoveAll(VertBoard_Origin, VertBoard_Origin - [0 m; 2*ConRadius(ND_CoagCalCol); 0 m])
FreezeBoards := FreezeLayer("CdcCalColumnStand")
CdcCalColumn2_Script := stack(MakeCalColLayer, MainCoagCalCol, MainChlorCalCol, CHT1, CHT2, FreezeCalCol, MakeCapsLayer, CoagTopCap, CoagBottomCap, ChlorTopCap, ChlorBottomCap, FreezeCapsLayer, DrawCoagCylinder, DrawChlorCylinder, LayCylinder, MakeHole, LayStand, MakeSlantBoard, MakeVertBoard, MakeHorizBoard, FreezeBoards)
CdcCalColumn1_Script := stack(MakeCalColLayer, MainChlorCalCol, CHT1, FreezeCalCol, MakeCapsLayer, ChlorTopCap, ChlorBottomCap, FreezeCapsLayer, DrawChlorCylinder, CHT2, LayCylinder, MakeHole, LayStand, MakeSlantBoard, MakeVertBoard, MakeHorizBoard, FreezeBoards)
# Calibration Column and Constant Head Tanks
# Need to fix FlexTubeF in order to use this code
# Flexible Tubing NEW
Given
dist := .1
inlet[1] == m_par*inlet[0] + b_par
outlet[1] == m_par*outlet[0] + b_par
LinVars(inlet, outlet, m_par, b_par) := Find(m_par, b_par)
Given
Cat_Lt == integral(sqrt(((outlet[0] - inlet[0])/n_temp)^2 + (LinVars(inlet, outlet, 1, 1)[0]*(outlet[0] - inlet[0])/n_temp)^2 + ((2*A_par)*(inlet[0] + t_par*(outlet[0] - inlet[0])/n_temp) + B_par)^2), t_par = 0 .. n_temp)
inlet[2] == A_par*inlet[0]^2 + B_par*inlet[0] + C_par
outlet[2] == A_par*outlet[0]^2 + B_par*outlet[0] + C_par
A_par > 0
XVars(A_par, B_par, C_par, inlet, outlet, Cat_Lt, n_temp) := Find(A_par, B_par, C_par)
Given
Cat_Lt == integral(sqrt(((outlet[0] - inlet[0])/n_temp)^2 + (LinVars(inlet, outlet, 1, 1)[0]*(outlet[0] - inlet[0])/n_temp)^2 + ((2*D_par)*(inlet[1] + t_par*(outlet[1] - inlet[1])/n_temp) + E_par)^2), t_par = 0 .. n_temp)
inlet[2] == D_par*inlet[1]^2 + E_par*inlet[1] + F_par
outlet[2] == D_par*outlet[1]^2 + E_par*outlet[1] + F_par
D_par > 0
YVars(D_par, E_par, F_par, inlet, outlet, Cat_Lt, n_temp) := Find(D_par, E_par, F_par)
ParPointF(n_temp, dir_temp, inlet, outlet, Cat_Lt) :=
    inlet[0] ← inlet[0]*(-1)
    outlet[0] ← outlet[0]*(-1)
    offset ← -dist*dir_temp*m
    for t ∈ 0 .. n_temp
        if |inlet[0] - outlet[0]| > |inlet[1] - outlet[1]|
            ParPoint[t + 2] ← [
                inlet[0] + t*(outlet[0] - inlet[0])/n_temp;
                LinVars(inlet/m, outlet/m, 0, 0)[0]*(inlet[0] + t*(outlet[0] - inlet[0])/n_temp) + LinVars(inlet/m, outlet/m, 0, 0)[1]*m;
                XVars(0, 0, 0, inlet/m, outlet/m, Cat_Lt/m, n_temp)[0]*(inlet[0] + t*(outlet[0] - inlet[0])/n_temp)^2/m + XVars(0, 0, 0, inlet/m, outlet/m, Cat_Lt/m, n_temp)[1]*(inlet[0] + t*(outlet[0] - inlet[0])/n_temp) + XVars(0, 0, 0, inlet/m, outlet/m, Cat_Lt/m, n_temp)[2]*m
            ]
        if |inlet[1] - outlet[1]| ≥ |inlet[0] - outlet[0]|
            ParPoint[t + 2] ← [
                ((inlet[1] + t*(outlet[1] - inlet[1])/n_temp) - (LinVars(inlet/m, outlet/m, 0, 0)[1]*m))/LinVars(inlet/m, outlet/m, 1, 1)[0];
                inlet[1] + t*(outlet[1] - inlet[1])/n_temp;
                YVars(0, 0, 0, inlet/m, outlet/m, Cat_Lt/m, n_temp)[0]*(inlet[1] + t*(outlet[1] - inlet[1])/n_temp)^2/m + YVars(0, 0, 0, inlet/m, outlet/m, Cat_Lt/m, n_temp)[1]*(inlet[1] + t*(outlet[1] - inlet[1])/n_temp) + YVars(0, 0, 0, inlet/m, outlet/m, Cat_Lt/m, n_temp)[2]*m
            ]
    for tt ∈ 0 .. 1
        ParPoint[tt] ← offset[0, 0]*(2 - tt) + inlet
        ParPoint[tt + n_temp + 3] ← offset[0, 1]*(tt + 1) + outlet
    return ParPoint
TanPoints(n_temp, dir_temp, inlet, outlet, Cat_Lt) :=
    x ← ParPointF(n_temp, dir_temp, inlet, outlet, Cat_Lt)
    offset ← -dist*dir_temp
    [x[0] - offset[0, 0]*m; x[last(x)] + offset[0, 1]*m]  # what is the point of multiplying the points with -1?
# The tangent points..and the par points should all be the same?
# Still need to figure out why the spline would loop back
FlexCylinderF(n_temp, dir_temp, inlet, outlet, Cat_Lt, D) :=
    PP ← ParPointF(n_temp, dir_temp, inlet, outlet, Cat_Lt)
    TP ← TanPoints(n_temp, dir_temp, inlet, outlet, Cat_Lt)
    Path ← concat("spline", sp, point(PP[0]), sp, "t", sp, point(TP[0]), sp)
    for j ∈ 1 .. last(PP)
        Path ← concat(Path, point(PP[j]), sp)
    Path ← concat(Path, "t", sp, point(TP[1]))
    DrawCircle ← circle(PP[0], D/2)
    CirclePoint ← [-D/2; 0; 0] + PP[0]
    SetSurfaceAssociativity ← concat("surfaceassociativity", sp, "0")
    SetDelObj ← concat("delobj", sp, "2")
    Sweep ← concat("sweep", sp, "mo", sp, "so", sp, point(CirclePoint), sp, sp, point(PP[1]))
    Concat ← concat(DrawCircle, sp, SetSurfaceAssociativity)
    ZoomFlex ← concat("z", sp, "e")
    SplineEdit ← concat("splinedit", sp, point(PP[0]), sp, "p", sp, "10", sp, sp)
    Mirror ← MirrorLast([0; 0]*m, [0; 100]*m, "y")
    FinalStack ← stack(Path, SplineEdit, ZoomFlex, Concat, SetDelObj, Sweep, Mirror)
    return FinalStack  # Does FlexTubeF not work because of FlexCylinderF?
# n.temp specifies number of divisions the parabola will use (5 is a good number, do not exceed 10)
# dir.t specifies the tangency of the inlet and outlet, in the form of a 2-point point array. e.g. (1,0,0),(0,0,-1) is read as inlet facing positive x direction, outlet facing negative z direction
# Cat.Lt is the length of the tube minus the length of the pieces fitted over the couplings
# Inlet and outlet are the inlet and outlet coordinates, corresponding to the center point directly on the end of the coupling.
# ID and OD are inner and outer diameters of pipe, respectively
Dir_t := [0, 0; -1, 1; 0, 0]
Inlet := [-5.773; 5.092; 2.446]*m
Outlet := [-2; 5.951; 1.596]*m
FlexTubeF(N_Temp, Dir_t, Inlet, Outlet, L_Cat, ID, OD) :=
    PP ← ParPointF(N_Temp, Dir_t, Inlet, Outlet, L_Cat)
    TP ← TanPoints(N_Temp, Dir_t, Inlet, Outlet, L_Cat)
    Outer ← FlexCylinderF(N_Temp, Dir_t, Inlet, Outlet, L_Cat, OD)
    Inner ← FlexCylinderF(N_Temp, Dir_t, Inlet + Dir_t[:, 0]*zc, Outlet, L_Cat, ID)
    Zoom ← ZoomWindow(Inlet, Inlet + [L_Cat; L_Cat; L_Cat])
    SubtractInner ← SubtractGeneral([Inlet], [Inlet + Dir_t[:, 0]*zc])
    Mirror ← MirrorLast([0; 0]*m, [0; 100]*m, "y")
    Final ← stack(Outer, Inner, Zoom, SubtractInner, Mirror)
    return Final
Inlet + Dir_t[:, 0]*zc = [-5.773; 5.082; 2.446] m
N_TempCDCFlexTubes := 5
ConnectionTubesLayer := layer_new("CdcConnectionsPlu", red)
# Stock tank to CHT
Inlet1
Outlet1
# CHT to Manifold
CHT_Origin = [-9.0402; 4.53047; 2.67396] m  # Coagulant - Stock tank to CHT, CHT to Manifold, Manifold to Drop tube, drop tube to dosing location
CoagCHTtoManifold_Inlet := CHT_Origin
# Chlorine - Stock tank to CHT, CHT to Manifold, Manifold to Drop tube, drop tube to dosing "drop off"
CoagCHTtoManifold_Inlet = [-9.0402; 4.53047; 2.67396] m
CoagCHTtoManifold_Outlet := CoagDeliveryPipe_Origin
CoagDeliveryPipe_Origin = [-3.27519; 5.83056; 1.75626] m
L_CoagCHTtoManifold := 1.3*sqrt((CoagCHTtoManifold_Outlet[0] - CoagCHTtoManifold_Inlet[0])^2 + (CoagCHTtoManifold_Outlet[1] - CoagCHTtoManifold_Inlet[1])^2 + (CoagCHTtoManifold_Outlet[2] - CoagCHTtoManifold_Inlet[2])^2)
L_CoagCHTtoManifold = 7.7748 m
ID_CoagCHTtoManifold := 3/4*in  # GO BACK AND CHECK THIS WITH THE CDC TEAM/PREVIOUS REPORTS
Inlet2 := [-9.04; 4.53; 2.674]*m
FlexTubeF(n_temp, dir_t, inlet, outlet, Cat_Lt, ND, LayerName, LayerColor)
Outlet2 := [-3.275; 5.831; 1.756]*m
OD_CoagCHTtoManifold := FlexibleTubingEng[:, 1][index2(ID_CoagCHTtoManifold, FlexibleTubingEng[:, 0])]
FlexTubeF(N_Temp, Dir_t, Inlet, Outlet, L_Cat, ID, OD)
OD_CoagCHTtoManifold = 0.875 in
Dir_ManifoldFlexTubes := [-1, 1; 0, 0; 0, 0]
CoagCHTtoManifold := FlexTubeF(N_TempCDCFlexTubes, Dir_ManifoldFlexTubes, Inlet2, Outlet2, L_CoagCHTtoManifold, ID_CoagCHTtoManifold, OD_CoagCHTtoManifold)
CoagCHTtoManifoldT := FlexCylinderF(N_TempCDCFlexTubes, Dir_ManifoldFlexTubes, Inlet2, Outlet2, L_CoagCHTtoManifold, OD_CoagCHTtoManifold)
InnerTest := FlexCylinderF(N_TempCDCFlexTubes, Dir_ManifoldFlexTubes, Inlet + Dir_t[:, 0]*zc, Outlet, L_CoagCHTtoManifold, ID_CoagCHTtoManifold)
ParPointF(N_TempCDCFlexTubes, Dir_ManifoldFlexTubes, Inlet1, Outlet1, L_CoagCHTtoManifold)
# [component: inputs CoagCHTtoManifold]
# [component: inputs InnerTest]
# [component: inputs InnerTest]
# [component: inputs CoagCHTtoManifoldT]
CoagCHTtoManifold_Outlet = [-3.27519; 5.83056; 1.75626] m
TanPoints(N_TempCDCFlexTubes, Dir_ManifoldFlexTubes, Inlet, Outlet, L_CoagCHTtoManifold) = [[5.873; 5.192; 2.546]; [1.7; 5.651; 1.296]] m
# Manifold to drop tube
CoagManifoldtoDroptube_Inlet := CoagDeliveryPipe_Origin = [-3.27519; 5.83056; 1.75626] m
CoagManifoldtoDroptube_Outlet := LADt_Center = [-7.2976; 5.32807; 2.63726] m
L_CoagManifoldtoDroptube := 1.3*sqrt((CoagManifoldtoDroptube_Outlet[0] - CoagManifoldtoDroptube_Inlet[0])^2 + (CoagManifoldtoDroptube_Outlet[1] - CoagManifoldtoDroptube_Inlet[1])^2 + (CoagManifoldtoDroptube_Outlet[2] - CoagManifoldtoDroptube_Inlet[2])^2)
Dir_ManifoldtoDroptube := [-1, 0; 0, 1; 0, 0]
Outlet3 := [-7.298; 5.328; 2.637]*m
Inlet3 := [-3.275; 5.831; 1.756]*m
ID_CoagManifoldtoDroptube := 1/8*in
# Why would the name matter?
OD_CoagManifoldtoDroptube := FlexibleTubingEng[:, 1][index2(ID_CoagManifoldtoDroptube, FlexibleTubingEng[:, 0])] = 0.00635 m
CoagManifoldtoDroptube := FlexTubeF(N_TempCDCFlexTubes, Dir_ManifoldFlexTubes, Inlet3, Outlet3, L_CoagManifoldtoDroptube, ID_CoagManifoldtoDroptube, OD_CoagManifoldtoDroptube)
CoagManifoldtoDroptubeT := FlexCylinderF(N_TempCDCFlexTubes, Dir_ManifoldFlexTubes, Inlet3, Outlet3, L_CoagManifoldtoDroptube, OD_CoagManifoldtoDroptube)
# [component: inputs CoagManifoldtoDroptube]
# [component: inputs CoagManifoldtoDroptubeT]
FlexibleT_Script := stack(CoagCHTtoManifoldT, CoagManifoldtoDroptube)
# Flexible Tubing TEST
FlexTubeF(n_temp, dir_t, inlet, outlet, Cat_Lt, ND, LayerName, LayerColor) :=
    PP ← ParPointF(n_temp, dir_t, inlet, outlet, Cat_Lt)
    TP ← TanPoints(n_temp, dir_t, inlet, outlet, Cat_Lt)
    Inner ← FlexCylinderF(n_temp, dir_t, inlet, outlet, Cat_Lt, InnerDiameterFlex(ND))
    Group ← GroupLast("DeleteMe")
    Layer ← layer_new(LayerName, LayerColor)
    Outer ← FlexCylinderF(n_temp, dir_t, inlet, outlet, Cat_Lt, OuterDiameterFlex(ND))
    SubtractInner ← SubtractF([LayerName], "DeleteMe")
    Mirror ← concat("mirror", sp, "g", sp, LayerName, sp, sp, "0,0", sp, "0,100", sp, "y")
    Final ← stack(Layer, Outer, FreezeLayer(LayerName), Inner, Group, SubtractInner, layer_thaw(LayerName), Mirror, FreezeLayer(LayerName))
    return Final
Dir_ManifoldFlexTubes = [-1, 1; 0, 0; 0, 0]
CoagCHTtoManifold == FlexTubeF(N_TempCDCFlexTubes, Dir_ManifoldFlexTubes, CoagCHTtoManifold_Inlet, CoagCHTtoManifold_Outlet, L_CoagCHTtoManifold, ID_CoagCHTtoManifold, "test", red)
TanPoints(N_TempCDCFlexTubes, Dir_ManifoldFlexTubes, CoagCHTtoManifold_Inlet, CoagCHTtoManifold_Outlet, L_CoagCHTtoManifold) = [[9.1402; 4.63047; 2.77396]; [2.97519; 5.53056; 1.45626]] m
Points := ParPointF(N_TempCDCFlexTubes, Dir_ManifoldFlexTubes, CoagCHTtoManifold_Inlet, CoagCHTtoManifold_Outlet, L_CoagCHTtoManifold) = [
    [9.2402; 4.73047; 2.87396]; [9.1402; 4.63047; 2.77396]; [9.0402; 4.53047; 2.67396]; [7.8872; 4.79049; 0.819538]; [6.7342; 5.05051; -0.199442]; [5.58119; 5.31052; -0.382982]; [4.42819; 5.57054; 0.268918]; [3.27519; 5.83056; 1.75626]; [3.17519; 5.73056; 1.65626]; [3.07519; 5.63056; 1.55626]
] m
# [component: inputs CoagCHTtoManifold]
CoagCHTtoManifold_Outlet = [-3.27519; 5.83056; 1.75626] m
Points[0] = [9.2402; 4.73047; 2.87396] m
CoagCHTtoManifold_Inlet = [-9.0402; 4.53047; 2.67396] m
CoagCHTtoManifold_Inlet = [-9.0402; 4.53047; 2.67396] m
L_CoagCHTtoManifold = 7.7748 m
.2*Dir_ManifoldFlexTubes = [-0.2, 0.2; 0, 0; 0, 0]
OuterTest == FlexCylinderF(N_TempCDCFlexTubes, Dir_ManifoldFlexTubes, CoagCHTtoManifold_Inlet + Dir_ManifoldFlexTubes[:, 0]*zc, CoagCHTtoManifold_Outlet, L_CoagCHTtoManifold, ID_CoagCHTtoManifold)
# [component: inputs OuterTest]
# Flexible Tubing OLD CODE
# Currently, flexible tubes are drawn as regular pipes. See the "Dosing Tubes" section.
FlexConnectLayer := layer_new("CdcFlexConnect", red)
# n.temp specifies number of divisions the parabola will use (5 is a good number, do not exceed 10)
# dir.t specifies the tangency of the inlet and outlet, in the form of a 2-point point array. e.g. (1,0,0),(0,0,-1) is read as inlet facing positive x direction, outlet facing negative z direction
# Cat.Lt is the length of the tube minus the length of the pieces fitted over the couplings
# Inlet and outlet are the inlet and outlet coordinates, corresponding to the center point directly on the end of the coupling.
# ID and OD are inner and outer diameters of pipe, respectively
SweepPoint1 := LA_Origin + [-.0894; -.792; .1092]*m
SweepPoint2 := SweepPoint1 + [1; 0; 0]*in
FlexTubeF(n_temp, dir_t, inlet, outlet, Cat_Lt, ID, OD, LayerName, LayerColor) :=
    PP ← ParPointF(n_temp, dir_t, inlet, outlet, Cat_Lt)
    TP ← TanPoints(n_temp, dir_t, inlet, outlet, Cat_Lt)
    Inner ← FlexCylinderF(n_temp, dir_t, inlet, outlet, Cat_Lt, ID)
    Group ← GroupLast("DeleteMe")
    Layer ← layer_new(LayerName, LayerColor)
    Outer ← FlexCylinderF(n_temp, dir_t, inlet, outlet, Cat_Lt, OD)
    SubtractInner ← SubtractF([LayerName], "DeleteMe")
    Mirror ← concat("mirror", sp, "g", sp, LayerName, sp, sp, "0,0", sp, "0,100", sp, "y")
    Final ← stack(Layer, Outer, FreezeLayer(LayerName), Inner, Group, SubtractInner, layer_thaw(LayerName), Mirror, FreezeLayer(LayerName))
    return Final
SweepPoint5 := CHT_Origin + [.1432; 0; -.0629]*m
SweepPoint4 := SweepPoint5 + [1; 0; 0]*in
SweepPoint3 := [(SweepPoint1[0] + SweepPoint5[0])/2; (SweepPoint1[1] + SweepPoint5[1])/2; SweepPoint1[2] - 50 cm]
PipeF(OriginPoint, Length, AngleVector, ND, EN) :=
    PipeOuter ← cylinderD(OriginPoint, outerradius(ND), OriginPoint - [Length; 0 m; 0 m])
    PipeInner ← cylinderD(OriginPoint + [zc; 0 m; 0 m], innerdiameter(ND, EN)/2, OriginPoint - [Length + zc; 0 m; 0 m])
    Zoom ← ZoomWindow([OriginPoint[0] - Length - zc; OriginPoint[1] - outerradius(ND) - zc; OriginPoint[2]], [OriginPoint[0] - Length + zc; OriginPoint[1] + outerradius(ND) + zc; OriginPoint[2]])
    SubtractInner ← SubtractGeneral([[OriginPoint[0] - Length; OriginPoint[1] + outerradius(ND); OriginPoint[2]]], [[OriginPoint[0] - Length - zc; OriginPoint[1] + innerdiameter(ND, EN)/2; OriginPoint[2]]])
    Rotate ← [Rotate3DLast(OriginPoint, "z", AngleVector[0]); Rotate3DLast(OriginPoint, "y", AngleVector[1])]
    Final ← stack(PipeOuter, PipeInner, Zoom, SubtractInner)
    for i ∈ 0 .. 1
        Final ← stack(Final, Rotate[i]) if AngleVector[i] ≠ 0
    return Final
SweepPathPoints := [SweepPoint1; SweepPoint2; SweepPoint3; SweepPoint4; SweepPoint5]
FlexTube_Trial == FlexTube(SweepPathPoints, .125 in, .2 in, "CdcFlexConnect", red)
# Insert in stack when flexcylinder fixed
FlexTubeF(n_temp, dir_t, inlet, outlet, Cat_Lt, ID, OD, LayerName, LayerColor)
FlexConnectLayer, FlexTube_Trial, FreezeLayer("CdcFlexConnect")
# Flex tube Trial with new code!
# n.temp specifies number of divisions the parabola will use (5 is a good number, do not exceed 10)
# dir.t specifies the tangency of the inlet and outlet, in the form of a 2-point point array. e.g. (1,0,0),(0,0,-1) is read as inlet facing positive x direction, outlet facing negative z direction
# Cat.Lt is the length of the tube minus the length of the pieces fitted over the couplings
# Inlet and outlet are the inlet and outlet coordinates, corresponding to the center point directly on the end of the coupling.
# ID and OD are inner and outer diameters of pipe, respectively
FlexConnectLayer := layer_new("CdcFlexConnect", red)
LA_Origin = [-7.2686; 5.71867; 2.56896] m
CHT_Origin = [-9.0402; 4.53047; 2.67396] m
Test := ParPointF(8, [-1, 0; 0, 0; 0, 1], LA_Origin, CHT_Origin, 3 m)
NewTube == FlexTubeF(8, [-1, 0; 0, 0; 0, 1], LA_Origin, CHT_Origin, 3 m, 1 in, 1 in, "CdcFlexConnect", red)
# [component: inputs NewTube]
FlexConnectLayer, NewTube, FreezeLayer("CdcFlexConnect")
AC_Cdc2 := stack(Cdc2_Script, Component_Script, Manifold_Script, FlexibleT_Script, CdcCalColumn2_Script)
AC_Cdc1 := stack(Cdc1_Script, Component_Script, Manifold_Script, FlexibleT_Script, CdcCalColumn1_Script)
AC_Cdc := AC_Cdc2
Drawing := stack(EtTankScript, AC_Cdc, AC_ChemTanks)
AltDrawing := stack(EtTankScript, AC_Cdc1, AC_ChemTanks)
# [component: inputs Drawing]
