W_ChemWalkwayMin := 0.8 m
ND_ChlorPipe := 1/2*in
S_FiBoxToChemPlatformMin := 0.8 m
ND_CoagPipe := 1/2*in
W_EtWalkwayOpt := 1.5 m
H_ChemPlatformWall := 1 m
W_EtWalkwayMax := 2 m
W_ChemStairsOpt := 1.2 m
# Chemical Stock Tank AutoCAD
Z_ChemPlatform := Z_CoagTank - T_ChemTankWall
# Layers
OpChemPlatformLayer := layer_new("OpChemPlatformCon", grey)
SelectOpChemPlatform := SelectLayer("OpChemPlatformCon")
OpChemPlatformFrz := FreezeLayer("OpChemPlatformCon")
SubtractFromOpChemPlatform := SubtractF(["OpChemPlatformCon"], "DeleteMe")
ChemCoagTankLayer := layer_new("ChemCoagTank", purple)
SelectChemCoagTank := SelectLayer("ChemCoagTank")
ChemCoagTankFrz := FreezeLayer("ChemCoagTank")
SubtractFromChemCoagTank := SubtractF(["ChemCoagTank"], "DeleteMe")
ChemChlorineTankLayer := layer_new("ChemChlorineTank", ltpurple)
SelectChemChlorineTank := SelectLayer("ChemChlorineTank")
ChemChlorineTankFrz := FreezeLayer("ChemChlorineTank")
SubtractFromChemChlorineTank := SubtractF(["ChemChlorineTank"], "DeleteMe")
ChemCoagFittingLayer := layer_new("ChemCoagFittingPlu", green)
SelectChemCoagFitting := SelectLayer("ChemCoagFittingPlu")
ChemCoagFittingFrz := FreezeLayer("ChemCoagFittingPlu")
ChemCoagPipeLayer := layer_new("ChemCoagPipePlu", blue)
SelectChemCoagPipe := SelectLayer("ChemCoagPipePlu")
ChemCoagPipeFrz := FreezeLayer("ChemCoagPipePlu")
ChemChlorineFittingLayer := layer_new("ChemChlorineFittingPlu", green)
SelectChemChlorineFitting := SelectLayer("ChemChlorineFittingPlu")
ChemChlorineFittingFrz := FreezeLayer("ChemChlorineFittingPlu")
ChemChlorinePipeLayer := layer_new("ChemChlorinePipePlu", blue)
SelectChemChlorinePipe := SelectLayer("ChemChlorinePipePlu")
ChemChlorinePipeFrz := FreezeLayer("ChemChlorinePipePlu")
ChemDrainFittingLayer := layer_new("ChemDrainFittingPlu", green)
SelectChemDrainFitting := SelectLayer("ChemDrainFittingPlu")
ChemDrainFittingFrz := FreezeLayer("ChemDrainFittingPlu")
ChemDrainPipeLayer := layer_new("ChemDrainPipePlu", blue)
SelectChemDrainPipe := SelectLayer("ChemDrainPipePlu")
ChemDrainPipeFrz := FreezeLayer("ChemDrainPipePlue")
# Chemical platform masonry
W_PlantStairwell := W_BasementStairs + T_PlantWall + W_EntranceStairs
EN_Stairwell :=
    0 if (Et_Origin[1] + W_Et + T_PlantWall + W_EtWalkwayMax) - (Fi_origin[1] + N_Fi*(W_Fi + T_FiWall)) - (S_ChemTankBorder + 2*R_CoagTank + W_ChemWalkwayMin + T_PlantWall) < W_PlantStairwell
    1 otherwise
EN_Stairwell := 0
W_ChemStairs :=
    1 m if EN_Stairwell == 0
    1.2 m otherwise
W_PlantStairwell =  # error: This variable is undefined.
W_ChemStairs + T_PlantWall + S_FiBoxToChemPlatformMin =  # error
W_EtWalkwayFitChemStairwell := (S_ChemTankBorder + 2*R_CoagTank + W_ChemWalkwayMin + T_PlantWall + W_PlantStairwell) - ((Et_Origin[1] + W_Et + T_PlantWall) - (Fi_origin[1] + N_Fi*(W_Fi + T_FiWall)))
W_EtWalkwayFitChemNoStairwell := (S_ChemTankBorder + 2*R_CoagTank + W_ChemWalkwayMin + T_PlantWall + W_ChemStairs + T_PlantWall) - ((Et_Origin[1] + W_Et + T_PlantWall) - (FiInletChannel_Origin[1] + L_FiInletChannel + T_PlantWall + S_FiBoxToChemPlatformMin))
W_EtWalkwayFitChem := (S_ChemTankBorder + 2*R_CoagTank + W_ChemWalkwayMin + T_PlantWall + W_PlantStairwell*(EN_Stairwell == 1) + W_ChemStairs*(EN_Stairwell == 0)) - ((Et_Origin[1] + W_Et + T_PlantWall) - (Fi_origin[1] + N_Fi*(W_Fi + T_FiWall)))
W_EtWalkway := max(W_EtWalkwayOpt, W_EtWalkwayFitChem)
# Dimension calculations
W_ChemPlatform := (Et_Origin[0] - L_Et - T_PlantWall - W_DCWalkway - T_PlantWall) - (Fi_origin[0] - L_Fi - T_FiWall + T_PlantWall)  # X dimension
L_ChemPlatform := (Et_Origin[1] + W_Et + T_PlantWall + W_EtWalkway) - ((Fi_origin[1] + N_Fi*(W_Fi + T_FiWall) + W_PlantStairwell)*(EN_Stairwell == 1) + (FiInletChannel_Origin[1] + L_FiInletChannel + 2*T_PlantWall + S_FiBoxToChemPlatformMin + W_ChemStairs)*(EN_Stairwell == 0) + T_PlantWall)
# Y dimension
H_ChemStairs := Z_ChemPlatform - Z_Walkway
L_ChemStairs :=
    L_Stairs(H_ChemStairs) if EN_Stairwell == 0
    W_EntranceStairs otherwise
H_ChemStair := H_StairFixed(L_ChemStairs, H_ChemStairs)
W_ChemStair := W_StairFixed(L_ChemStairs)
# Slab and stair origins and dimensions
ChemPlatformFloor_Origin := [
    Et_Origin[0] - L_Et - T_PlantWall - W_DCWalkway - T_PlantWall;
    Et_Origin[1] + W_Et + T_PlantWall + W_EtWalkway;
    Z_ChemPlatform
]
ChemPlatformFloor_Dim := [-W_ChemPlatform; -L_ChemPlatform; -T_PlantWall]
ChemStairsY_Origin := ChemPlatformFloor_Origin + [-W_ChemPlatform + W_ChemStairs; -L_ChemPlatform - T_PlantWall; 0 m]
# If chem stairs oriented down the Y axis, bridging the stairwell in the case of a stairwell
ChemStairsX_Origin := ChemPlatformFloor_Origin + [T_PlantWall - L_ChemStairs; -L_ChemPlatform - T_PlantWall; 0 m]
# If chem stairs oriented in the X axis, in the case of no stairwell
H_ChemWallsTotal := Z_ChemPlatform + H_ChemPlatformWall - Z_Walkway
# Chem platform slabs
ChemPlatformFloor := BoxF(ChemPlatformFloor_Origin, ChemPlatformFloor_Origin + ChemPlatformFloor_Dim, [0; 0; 0]*deg)
ChemStairs :=
    StairsFixedF(ChemStairsX_Origin, W_ChemStairs, H_ChemStairs, L_ChemStairs, 0 deg) if EN_Stairwell == 0
    StairsFixedF(ChemStairsY_Origin, W_ChemStairs, H_ChemStairs, L_ChemStairs, -90 deg) otherwise
ChemStairLanding :=
    BoxF(ChemStairsX_Origin + [0 m; T_PlantWall; 0 m], ChemStairsX_Origin + [-W_ChemPlatform + L_ChemStairs - T_PlantWall; -W_ChemStairs; -T_PlantWall], [0; 0; 0]*deg) if EN_Stairwell == 0
    view("t") otherwise
ChemSlabScript := stack(OpChemPlatformLayer, ChemPlatformFloor, ChemStairs, ChemStairLanding)
# Wall origins and dimensions
ChemPlatformEastWall_Origin := [ChemPlatformFloor_Origin[0]; ChemPlatformFloor_Origin[1] + T_PlantWall; Z_Walkway]
ChemPlatformEastWall_Dim := [T_PlantWall; -2*T_PlantWall - L_ChemPlatform; H_ChemWallsTotal]
ChemPlatformNorthWall_Origin := [ChemPlatformFloor_Origin[0] + T_PlantWall; ChemPlatformFloor_Origin[1]; Z_Walkway]
ChemPlatformNorthWall_Dim := [-2*T_PlantWall - W_ChemPlatform; T_PlantWall; H_ChemWallsTotal]
ChemPlatformWestWall_Origin := [ChemPlatformFloor_Origin[0] - W_ChemPlatform; ChemPlatformFloor_Origin[1] + T_PlantWall; Z_Walkway]
ChemPlatformWestWall_Dim := [
    -T_PlantWall;
    -L_ChemPlatform - 2*T_PlantWall - (W_ChemStairs + T_PlantWall)*(EN_Stairwell == 0);
    H_ChemWallsTotal
]
ChemPlatformSouthWall_Origin := [ChemPlatformFloor_Origin[0] + T_PlantWall; ChemPlatformFloor_Origin[1] - L_ChemPlatform; Z_Walkway]
ChemPlatformSouthWall_Dim := [
    -T_PlantWall - (W_ChemPlatform - W_ChemStairs)*(EN_Stairwell == 1) - L_ChemStairs*(EN_Stairwell == 0);
    -T_PlantWall;
    H_ChemWallsTotal
]
ChemStairLandingSouthWall_Origin := [
    ChemPlatformFloor_Origin[0] - W_ChemPlatform - T_PlantWall;
    ChemPlatformFloor_Origin[1] - L_ChemPlatform - T_PlantWall - W_ChemStairs;
    Z_Walkway
]
ChemStairLandingSouthWall_Dim := [2*T_PlantWall + W_ChemPlatform - L_ChemStairs; -T_PlantWall; H_ChemWallsTotal]
# Platform walls
ChemEastWall := BoxF(ChemPlatformEastWall_Origin, ChemPlatformEastWall_Origin + ChemPlatformEastWall_Dim, [0; 0; 0]*deg)
ChemEastWallPipeCut := BoxF([
    ChemPlatformFloor_Origin[0] - zc;
    Et_Origin[1] + W_Et - 12*ConRadius(1/2*in) - S_Fitting;
    Z_ChemPlatform - T_PlantWall - 2*ConRadius(1/2*in) - zc
], [ChemPlatformFloor_Origin[0] + T_PlantWall + zc; Et_Origin[1] + W_Et; Z_ChemPlatform - T_PlantWall], [0; 0; 0]*deg)
ChemNorthWall := BoxF(ChemPlatformNorthWall_Origin, ChemPlatformNorthWall_Origin + ChemPlatformNorthWall_Dim, [0; 0; 0]*deg)
ChemWestWall := BoxF(ChemPlatformWestWall_Origin, ChemPlatformWestWall_Origin + ChemPlatformWestWall_Dim, [0; 0; 0]*deg)
ChemSouthWall := BoxF(ChemPlatformSouthWall_Origin, ChemPlatformSouthWall_Origin + ChemPlatformSouthWall_Dim, [0; 0; 0]*deg)
ChemStairLandingSouthWall :=
    BoxF(ChemStairLandingSouthWall_Origin, ChemStairLandingSouthWall_Origin + ChemStairLandingSouthWall_Dim, [0; 0; 0]*deg) if EN_Stairwell == 0
    view("t") otherwise
ChemStairWall1 :=
    if EN_Stairwell == 1
        WedgeF(ChemStairsY_Origin + [T_PlantWall; -L_ChemStairs; 0 m], ChemStairsY_Origin + [
            T_PlantWall + L_ChemStairs + W_ChemStair + T_Floor;
            -L_ChemStairs + T_PlantWall;
            -H_ChemStairs - T_Floor
        ], [90; 0; 0]*deg)
    view("t") otherwise
ChemStairWall2 :=
    BoxF(ChemStairsY_Origin + [T_PlantWall; -L_ChemStairs; 0 m], ChemStairsY_Origin + [0 m; 0 m; H_ChemPlatformWall], [0; 0; 0]*deg) if EN_Stairwell == 1
    view("t") otherwise
ChemStairWallCut :=
    if EN_Stairwell == 1
        WedgeF(ChemStairsY_Origin + [
            T_PlantWall;
            -L_ChemStairs;
            H_ChemPlatformWall + (T_Floor + W_ChemStair)*(H_ChemStairs + T_Floor)/(L_ChemStairs + W_ChemStair + T_Floor)
        ], ChemStairsY_Origin + [
            T_PlantWall + L_ChemStairs + W_ChemStair + T_Floor;
            -L_ChemStairs + T_PlantWall;
            -H_ChemStairs - T_Floor + H_ChemPlatformWall + (T_Floor + W_ChemStair)*(H_ChemStairs + T_Floor)/(L_ChemStairs + W_ChemStair + T_Floor)
        ], [90; 0; 0]*deg)
    otherwise
        WedgeF(ChemStairsX_Origin + [
            L_ChemStairs;
            T_PlantWall;
            H_ChemPlatformWall + (T_Floor + W_ChemStair)*(H_ChemStairs + T_Floor)/(L_ChemStairs + W_ChemStair + T_Floor)
        ], ChemStairsX_Origin + [
            -W_ChemStair - T_Floor;
            0 m;
            -H_ChemStairs - T_Floor + H_ChemPlatformWall + (T_Floor + W_ChemStair)*(H_ChemStairs + T_Floor)/(L_ChemStairs + W_ChemStair + T_Floor)
        ], [0; 0; 0]*deg)
ChemWallScript := stack(ChemStairWall1, ChemStairWall2, OpChemPlatformFrz, ChemStairWallCut, GroupDelete, SubtractFromOpChemPlatform, SelectOpChemPlatform, ChemEastWall, ChemNorthWall, ChemWestWall, ChemSouthWall, ChemStairLandingSouthWall, Union_All, OpChemPlatformFrz, ChemEastWallPipeCut, GroupDelete, SubtractFromOpChemPlatform)
ChemMasonryScript := stack(ChemSlabScript, ChemWallScript)
# Chem storage tanks
# Origin points
CoagTank_Origin := ChemPlatformFloor_Origin + [-S_ChemTankBorder - R_CoagTank; -S_ChemTankBorder - R_CoagTank; T_ChemTankWall]
ChlorineTank_Origin := CoagTank_Origin + [-3*R_CoagTank - 2*S_ChemTankBorder - R_ChlorineTank; R_CoagTank - R_ChlorineTank; 0 m]
CoagOutlet_Origin := [CoagTank_Origin[0]; CoagTank_Origin[1] - R_CoagTank; Z_CoagTankOutlet]
ChlorOutlet_Origin := [ChlorineTank_Origin[0]; ChlorineTank_Origin[1] - R_ChlorineTank; Z_CoagTankOutlet]
L_ChemTanksTotal := 4*R_CoagTank + 4*R_ChlorineTank + 5*S_ChemTankBorder
R_TankOutlet := .75 in
# First coagulant tank
CoagOuterTankWall := CylinderF(CoagTank_Origin - [0 m; 0 m; T_ChemTankWall], R_CoagTank, H_CoagTank, [0; 90]*deg)
CoagInnerTankWall := CylinderF(CoagTank_Origin, R_CoagTank - T_ChemTankWall, H_CoagTank, [0; 90]*deg)
CoagOutletCut := CylinderF(CoagOutlet_Origin + [0 m; -zc; 0 m], R_TankOutlet, 2*zc + T_ChemTankWall, [-90; 0]*deg)
CoagDrainCut := CylinderF(CoagTank_Origin + [0 m; 0 m; zc], R_TankOutlet, 2*zc + T_ChemTankWall, [0; 270]*deg)
CoagTankScript := stack(ChemCoagTankLayer, CoagOuterTankWall, ChemCoagTankFrz, CoagInnerTankWall, CoagOutletCut, CoagDrainCut, GroupDelete, SubtractFromChemCoagTank)
# First chlorine tank
ChlorOuterTankWall := CylinderF(ChlorineTank_Origin - [0 m; 0 m; T_ChemTankWall], R_ChlorineTank, H_ChlorineTank, [0; 90]*deg)
ChlorInnerTankWall := CylinderF(ChlorineTank_Origin, R_ChlorineTank - T_ChemTankWall, H_ChlorineTank, [0; 90]*deg)
ChlorOutletCut := CylinderF(ChlorOutlet_Origin + [0 m; -zc; 0 m], R_TankOutlet, 2*zc + T_ChemTankWall, [-90; 0]*deg)
ChlorDrainCut := CylinderF(ChlorineTank_Origin + [0 m; 0 m; zc], R_TankOutlet, 2*zc + T_ChemTankWall, [0; 270]*deg)
ChlorTankScript := stack(ChemChlorineTankLayer, ChlorOuterTankWall, ChemChlorineTankFrz, ChlorInnerTankWall, ChlorOutletCut, ChlorDrainCut, GroupDelete, SubtractFromChemChlorineTank)
ChemTankScript := stack(CoagTankScript, ChlorTankScript)
# Plumbing origin points
L_ChemFirstPipe := 0.03 m
L_ChemSecondPipe := 0.05 m
L_BulkheadFittingEnd := 0.35*3/250*in
L_BallValve := 450/250*in
L_MaleInsertEnd := 3/4*3/250*in
ChlorMaleInsert_Origin := [ChlorOutlet_Origin[0]; ChlorOutlet_Origin[1] - L_BulkheadFittingEnd; ChlorOutlet_Origin[2]]
CoagMaleInsert_Origin := [CoagOutlet_Origin[0]; CoagOutlet_Origin[1] - L_BulkheadFittingEnd; CoagOutlet_Origin[2]]
FirstCoagPipe_Origin := [CoagMaleInsert_Origin[0]; CoagMaleInsert_Origin[1] - L_MaleInsertEnd; CoagMaleInsert_Origin[2]]
FirstChlorPipe_Origin := [ChlorMaleInsert_Origin[0]; ChlorMaleInsert_Origin[1] - L_MaleInsertEnd; ChlorMaleInsert_Origin[2]]
FirstCoagElbow_Origin := [FirstCoagPipe_Origin[0]; FirstCoagPipe_Origin[1] - L_ChemFirstPipe; FirstCoagPipe_Origin[2]]
FirstChlorElbow_Origin := [FirstChlorPipe_Origin[0]; FirstChlorPipe_Origin[1] - L_ChemFirstPipe; FirstChlorPipe_Origin[2]]
ChlorBallValve_Origin := [
    FirstChlorPipe_Origin[0] - ElbowRadius(ND_ChlorPipe) - L_ChemSecondPipe;
    FirstChlorElbow_Origin[1] - ElbowRadius(ND_ChlorPipe);
    FirstChlorPipe_Origin[2]
]
CoagBallValve_Origin := [
    FirstCoagElbow_Origin[0] - ElbowRadius(ND_CoagPipe) - L_ChemSecondPipe;
    FirstCoagElbow_Origin[1] - ElbowRadius(ND_CoagPipe);
    FirstCoagElbow_Origin[2]
]
CoagTee_Origin := [
    CoagTank_Origin[0] - R_CoagTank - S_ChemTankBorder/2;
    CoagBallValve_Origin[1];
    CoagBallValve_Origin[2] - ShortTeeLength(ND_CoagPipe)
]
ChlorTee_Origin := [
    ChlorineTank_Origin[0] - R_ChlorineTank - S_ChemTankBorder/2;
    ChlorBallValve_Origin[1];
    ChlorBallValve_Origin[2] - ShortTeeLength(ND_ChlorPipe)
]
# Coagulant tank plumbing
# Coagulant fittings
CoagBulkheadFitting := insertdwg("https://confluence.cornell.edu/download/attachments/173604905/BulkheadFittingScaled.dwg", CoagOutlet_Origin, 3/250, 3/250, 0 deg)
CoagMaleInsert := insertdwg("https://confluence.cornell.edu/download/attachments/173604905/MaleInsert.dwg", CoagMaleInsert_Origin, 3/250, 3/250, 0 deg)
CoagBallValve := insertdwg("https://confluence.cornell.edu/download/attachments/173604905/BallValve.dwg", CoagBallValve_Origin, 1/250, 1/250, 0 deg)
RotateBallValve := Rotate3DLast(CoagBallValve_Origin, "X", 270 deg)
RotateBallValve2 := Rotate3DLast(CoagBallValve_Origin, "Z", 90 deg)
CoagDrainBulkheadFitting := insertdwg("https://confluence.cornell.edu/download/attachments/173604905/BulkheadFittingScaled.dwg", CoagTank_Origin, 3/250, 3/250, 0 deg)
RotateBulkheadFitting := Rotate3DLast(CoagTank_Origin, "X", 90 deg)
CoagDrainMaleInsert := insertdwg("https://confluence.cornell.edu/download/attachments/173604905/MaleInsert.dwg", CoagTank_Origin + [0 m; 0 m; -L_BulkheadFittingEnd], 3/250, 3/250, 0 deg)
RotateMaleInsert := Rotate3DLast(CoagTank_Origin + [0 m; 0 m; -L_BulkheadFittingEnd], "X", 90 deg)
CoagFirstElbow := ElbowF(FirstCoagElbow_Origin, [0; 0; 180]*deg, ND_CoagPipe, PS_Modules)
ChemCoagFittingScript := stack(ChemCoagFittingLayer, CoagBulkheadFitting, CoagMaleInsert, CoagBallValve, RotateBallValve, RotateBallValve2, CoagDrainBulkheadFitting, RotateBulkheadFitting, CoagDrainMaleInsert, RotateMaleInsert, CoagFirstElbow, ChemCoagFittingFrz)
# Coagulant pipes
FirstCoagTankPipe := PipeF(FirstCoagPipe_Origin, L_ChemFirstPipe, [90; 0]*deg, ND_CoagPipe, PS_Modules)
SecondCoagPipe := PipeF(FirstCoagElbow_Origin + [-ElbowRadius(ND_CoagPipe); -ElbowRadius(ND_CoagPipe); 0 m], L_ChemSecondPipe, [0; 0]*deg, ND_CoagPipe, PS_Modules)
ThirdCoagPipe := PipeF(CoagBallValve_Origin + [-L_BallValve; 0 m; 0 m], CoagBallValve_Origin[0] - CoagTee_Origin[0] - L_BallValve - TeeLength(ND_CoagPipe)/2, [0; 0]*deg, ND_CoagPipe, PS_Modules)
ChemCoagPipeScript := stack(ChemCoagPipeLayer, FirstCoagTankPipe, SecondCoagPipe, ThirdCoagPipe, ChemCoagPipeFrz)
ChemCoagPlumbingScript := stack(ChemCoagFittingScript, ChemCoagPipeScript)
# Chlorine tank plumbing
# Chlorine fittings
ChlorBulkheadFitting := insertdwg("https://confluence.cornell.edu/download/attachments/173604905/BulkheadFittingScaled.dwg", ChlorOutlet_Origin, 3/250, 3/250, 0 deg)
ChlorMaleInsert := insertdwg("https://confluence.cornell.edu/download/attachments/173604905/MaleInsert.dwg", ChlorMaleInsert_Origin, 3/250, 3/250, 0 deg)
ChlorBallValve := insertdwg("https://confluence.cornell.edu/download/attachments/173604905/BallValve.dwg", ChlorBallValve_Origin, 1/250, 1/250, 0 deg)
RotateBallValve := Rotate3DLast(ChlorBallValve_Origin, "X", 270 deg)
RotateBallValve2 := Rotate3DLast(ChlorBallValve_Origin, "Z", 90 deg)
ChlorDrainBulkheadFitting := insertdwg("https://confluence.cornell.edu/download/attachments/173604905/BulkheadFittingScaled.dwg", ChlorineTank_Origin, 3/250, 3/250, 0 deg)
RotateBulkheadFitting := Rotate3DLast(ChlorineTank_Origin, "X", 90 deg)
ChlorDrainMaleInsert := insertdwg("https://confluence.cornell.edu/download/attachments/173604905/MaleInsert.dwg", ChlorineTank_Origin + [0 m; 0 m; -L_BulkheadFittingEnd], 3/250, 3/250, 0 deg)
RotateMaleInsert := Rotate3DLast(ChlorineTank_Origin + [0 m; 0 m; -L_BulkheadFittingEnd], "X", 90 deg)
ChlorFirstElbow := ElbowF(FirstChlorElbow_Origin, [0; 0; 180]*deg, ND_ChlorPipe, PS_Modules)
ChemChlorFittingScript := stack(ChemChlorineFittingLayer, ChlorBulkheadFitting, ChlorMaleInsert, ChlorBallValve, RotateBallValve, RotateBallValve2, ChlorDrainBulkheadFitting, RotateBulkheadFitting, ChlorDrainMaleInsert, RotateMaleInsert, ChlorFirstElbow, ChemChlorineFittingFrz)
# Chlorine pipes
FirstChlorPipe := PipeF(FirstChlorPipe_Origin, L_ChemFirstPipe, [90; 0]*deg, ND_ChlorPipe, PS_Modules)
SecondChlorPipe := PipeF(FirstChlorElbow_Origin + [-ElbowRadius(ND_ChlorPipe); -ElbowRadius(ND_ChlorPipe); 0 m], L_ChemSecondPipe, [0; 0]*deg, ND_ChlorPipe, PS_Modules)
ThirdChlorPipe := PipeF(ChlorBallValve_Origin + [-L_BallValve; 0 m; 0 m], ChlorBallValve_Origin[0] - ChlorTee_Origin[0] - L_BallValve - TeeLength(ND_ChlorPipe)/2, [0; 0]*deg, ND_ChlorPipe, PS_Modules)
ChemChlorPipeScript := stack(ChemChlorinePipeLayer, FirstChlorPipe, SecondChlorPipe, ThirdChlorPipe, ChemChlorinePipeFrz)
ChemChlorPlumbingScript := stack(ChemChlorFittingScript, ChemChlorPipeScript)
# Reflect the first coagulant and chlorine tanks and associated plumbing
ThawCoagPieces := ThawMultiple(["ChemCoagTank"; "ChemCoagFittingPlu"; "ChemCoagPipePlu"])
MirrorCoagPieces := MirrorAll([CoagTank_Origin[0] - R_CoagTank - S_ChemTankBorder/2; CoagTank_Origin[1]], [CoagTank_Origin[0] - R_CoagTank - S_ChemTankBorder/2; CoagTank_Origin[1] + zc], "n")
FreezeCoagPieces := FreezeMultiple(["ChemCoagTank"; "ChemCoagFittingPlu"; "ChemCoagPipePlu"])
ThawChlorinePieces := ThawMultiple(["ChemChlorineTank"; "ChemChlorineFittingPlu"; "ChemChlorinePipePlu"])
MirrorChlorinePieces := MirrorAll([ChlorineTank_Origin[0] - R_ChlorineTank - S_ChemTankBorder/2; ChlorineTank_Origin[1]], [ChlorineTank_Origin[0] - R_ChlorineTank - S_ChemTankBorder/2; ChlorineTank_Origin[1] + zc], "n")
FreezeChlorinePieces := FreezeMultiple(["ChemChlorineTank"; "ChemChlorineFittingPlu"; "ChemChlorinePipePlu"])
ChemReflectScript := stack(ThawCoagPieces, MirrorCoagPieces, FreezeCoagPieces, ThawChlorinePieces, MirrorChlorinePieces, FreezeChlorinePieces)
ThawChemPieces := ThawMultiple(["ChemCoagTank"; "ChemCoagPipePlu"; "ChemCoagFittingPlu"; "ChemChlorineTank"; "ChemChlorineFittingPlu"; "ChemChlorinePipePlu"])
CoagDrainPlatformCut1 := CylinderF(CoagTank_Origin + [0 m; 0 m; -T_ChemTankWall - T_PlantWall - zc], outerradius(3 in), T_PlantWall + 2*zc, [0; 90]*deg)
CoagDrainPlatformCut2 := CylinderF(CoagTank_Origin + [-2*R_CoagTank - S_ChemTankBorder; 0 m; -T_ChemTankWall - T_PlantWall - zc], outerradius(3 in), T_PlantWall + 2*zc, [0; 90]*deg)
ChlorineDrainPlatformCut1 := CylinderF(ChlorineTank_Origin + [0 m; 0 m; -T_ChemTankWall - T_PlantWall - zc], outerradius(3 in), T_PlantWall + 2*zc, [0; 90]*deg)
ChlorineDrainPlatformCut2 := CylinderF(ChlorineTank_Origin + [-2*R_ChlorineTank - S_ChemTankBorder; 0 m; -T_ChemTankWall - T_PlantWall - zc], outerradius(3 in), T_PlantWall + 2*zc, [0; 90]*deg)
CoagOutletPlatformCut := CylinderF([CoagTee_Origin[0]; CoagTee_Origin[1]; Z_ChemPlatform - T_PlantWall - zc], outerradius(3 in), T_PlantWall + 2*zc, [0; 90]*deg)
ChlorineOutletPlatformCut := CylinderF([ChlorTee_Origin[0]; ChlorTee_Origin[1]; Z_ChemPlatform - T_PlantWall - zc], outerradius(3 in), T_PlantWall + 2*zc, [0; 90]*deg)
ChemPlatformHoleScript := stack(CoagDrainPlatformCut1, CoagDrainPlatformCut2, ChlorineDrainPlatformCut1, ChlorineDrainPlatformCut2, CoagOutletPlatformCut, ChlorineOutletPlatformCut)
RotateChemPieces := Rotate_All(CoagTank_Origin, -90 deg)
SlideChemPiecesY := MoveAll(CoagTank_Origin, CoagTank_Origin + [0 m; -2*R_CoagTank - 4*R_ChlorineTank - 3*S_ChemTankBorder; 0 m])
FreezeChemPieces := FreezeMultiple(["ChemCoagTank"; "ChemCoagPipePlu"; "ChemCoagFittingPlu"; "ChemChlorineTank"; "ChemChlorineFittingPlu"; "ChemChlorinePipePlu"])
ChemTankPositionScript :=
    stack(ChemPlatformHoleScript, ThawChemPieces, RotateChemPieces, SlideChemPiecesY, FreezeChemPieces, GroupDelete, SubtractFromOpChemPlatform) if L_ChemTanksTotal > W_ChemPlatform
    stack(ChemPlatformHoleScript, GroupDelete, SubtractFromOpChemPlatform) otherwise
ChemTanksReflectRotateScript := stack(ChemReflectScript, ChemTankPositionScript)
# Un-mirrored plumbing to constant head tanks
# CASE 1: Tanks lined up on X axis
# Draw the plumbing that connects the all the pieces and leads to the constant head tanks
L_Coag2CoagPipe := 0.5*(W_EtChemPlatform - (2*R_CoagTank + 2*T_ChemTankWall + 2*S_ChemTankBorder) - sqrt(2)*(R_CoagTank + T_ChemTankWall + L_BulkheadFittingEnd + L_MaleInsertEnd + L_FirstPipe + L_BallValve + L_SecondPipe + ElbowRadius(ND_CoagPiping)) - TeeLength(ND_CoagPiping) - 2*ElbowRadius(ND_CoagPiping))
L_CoagYCorrection := ThirdCoagPipe_Origin[1] - 3*ElbowRadius(ND_CoagPiping) - L_Coag2CoagPipe - 0.5*TeeLength(ND_CoagPiping) - (ChemWallHole_Origin[1] + 0.5*L_PlatformHole)
L_CoagXCorrection := ChemWallHole_Origin[0] + T_PlantWall + zc - (ThirdCoagPipe_Origin[0] + ShortTeeLength(ND_CoagPiping) + 2*ElbowRadius(ND_CoagPiping) + L_FirstPipe)
L_ChlorfirstXCorrection := R_FilterCoagTank + zc
L_ChlorsecondXCorrection := R_ChlorineTank
L_ChlorfirstYCorrection := R_ChlorineTank
L_FCfirstXCorrection := R_FilterCoagTank + zc
L_ChlorsecondYCorrection := R_ChlorineTank + L_CoagYCorrection + 2*ElbowRadius(ND_CoagPiping) - 5*zc
L_ChlorthirdXCorrection := L_CoagXCorrection - 5*zc - 3*ElbowRadius(ND_CoagPiping)
L_FCYCorrection := L_CoagYCorrection + 5*zc
L_FCsecondXCorrection := 2*L_CoagXCorrection - 2*ElbowRadius(ND_CoagPiping)
LayerNewChemConnections := layer_new("ChemConnectionsPlu", green)
CoagElbow := ElbowF(ThirdCoagPipe_Origin - [0 m; 0 m; L_ThirdPipe1], [180; 270; 90]*deg, ND_CoagPiping, PS_Modules)
CoagElbow2 := ElbowF([
    CoagTank_Origin[0] - sqrt(2)/2*(R_CoagTank + T_ChemTankWall + L_BulkheadFittingEnd + L_FirstPipe + L_BallValve + L_SecondPipe + ElbowRadius(ND_CoagPiping));
    CoagTank_Origin[1] - W_EtChemPlatform + 2*R_CoagTank + 2*T_ChemTankWall + 2*S_ChemTankBorder + sqrt(2)/2*(R_CoagTank + T_ChemTankWall + L_BulkheadFittingEnd + L_FirstPipe + L_BallValve + L_SecondPipe + ElbowRadius(ND_CoagPiping));
    ThirdCoagPipe_Origin[2] - L_ThirdPipe1
], [180; 90; 90]*deg, ND_CoagPiping, PS_Modules)
ChlorElbow := ElbowF([
    ChlorineTank_Origin[0] - 2*R_ChlorineTank - 2*T_ChemTankWall - S_ChemTankBorder;
    ThirdChlorPipe_Origin[1];
    ThirdChlorPipe_Origin[2] - L_ThirdPipe1
], [0; 270; 270]*deg, ND_CoagPiping, PS_Modules)
ChlorTee := TeeF([
    ChlorineTank_Origin[0] + ShortTeeLength(ND_CoagPiping);
    ChlorineTank_Origin[1] + .5*(2*(S_ChemTankBorder + R_ChlorineTank + T_ChemTankWall) - W_EtChemPlatform);
    ThirdChlorPipe_Origin[2] - L_ThirdPipe
], [90; 180; 0]*deg, ND_CoagPiping, PS_Modules)
CoagTee := TeeF([
    ThirdCoagPipe_Origin[0] + ShortTeeLength(ND_CoagPiping);
    ThirdCoagPipe_Origin[1] - ElbowRadius(ND_CoagPiping) - L_Coag2CoagPipe - 0.5*TeeLength(ND_CoagPiping);
    ThirdCoagPipe_Origin[2] - L_ThirdPipe
], [90; 180; 0]*deg, ND_CoagPiping, PS_Modules)
CoagElbow3 := ElbowF([
    ThirdCoagPipe_Origin[0] + ShortTeeLength(ND_CoagPiping) + L_FirstPipe + ElbowRadius(ND_CoagPiping);
    ThirdCoagPipe_Origin[1] - 2*ElbowRadius(ND_CoagPiping) - L_Coag2CoagPipe - 0.5*TeeLength(ND_CoagPiping);
    ThirdCoagPipe_Origin[2] - L_ThirdPipe
], [0; 0; 0]*deg, ND_CoagPiping, PS_Modules)
CoagElbow4 := ElbowF([
    ThirdCoagPipe_Origin[0] + ShortTeeLength(ND_CoagPiping) + L_FirstPipe + ElbowRadius(ND_CoagPiping);
    ThirdCoagPipe_Origin[1] - 2*ElbowRadius(ND_CoagPiping) - L_Coag2CoagPipe - 0.5*TeeLength(ND_CoagPiping) - L_CoagYCorrection;
    ThirdCoagPipe_Origin[2] - L_ThirdPipe
], [0; 180; 180]*deg, ND_CoagPiping, PS_Modules)
ChlorElbow2 := ElbowF([
    (ChlorineTank_Origin[0] + ShortTeeLength(ND_CoagPiping)) + L_ChlorfirstXCorrection + ElbowRadius(ND_CoagPiping);
    ChlorineTank_Origin[1] + .5*(2*(S_ChemTankBorder + R_ChlorineTank + T_ChemTankWall) - W_EtChemPlatform) + ElbowRadius(ND_CoagPiping);
    ThirdChlorPipe_Origin[2] - L_ThirdPipe
], [180; 180; 0]*deg, ND_CoagPiping, PS_Modules)
ChlorElbow3 := ElbowF([
    (ChlorineTank_Origin[0] + ShortTeeLength(ND_CoagPiping)) + L_ChlorfirstXCorrection + ElbowRadius(ND_CoagPiping);
    (ChlorineTank_Origin[1] + .5*(2*(S_ChemTankBorder + R_ChlorineTank + T_ChemTankWall) - W_EtChemPlatform) + ElbowRadius(ND_CoagPiping)) + L_ChlorfirstYCorrection;
    ThirdChlorPipe_Origin[2] - L_ThirdPipe
], [0; 180; 0]*deg, ND_CoagPiping, PS_Modules)
ChlorElbow4 := ElbowF([
    (ChlorineTank_Origin[0] + ShortTeeLength(ND_CoagPiping)) + L_ChlorfirstXCorrection + ElbowRadius(ND_CoagPiping) + ElbowRadius(ND_CoagPiping) + ElbowRadius(ND_CoagPiping) + L_ChlorsecondXCorrection;
    (ChlorineTank_Origin[1] + .5*(2*(S_ChemTankBorder + R_ChlorineTank + T_ChemTankWall) - W_EtChemPlatform) + ElbowRadius(ND_CoagPiping)) + L_ChlorfirstYCorrection;
    ThirdChlorPipe_Origin[2] - L_ThirdPipe
], [0; 0; 0]*deg, ND_CoagPiping, PS_Modules)
ChlorElbow5 := ElbowF([
    ((ChlorineTank_Origin[0] + ShortTeeLength(ND_CoagPiping)) + L_ChlorfirstXCorrection + ElbowRadius(ND_CoagPiping) + 2*ElbowRadius(ND_CoagPiping)) + L_ChlorsecondXCorrection;
    ((ChlorineTank_Origin[1] + .5*(2*(S_ChemTankBorder + R_ChlorineTank + T_ChemTankWall) - W_EtChemPlatform) + ElbowRadius(ND_CoagPiping)) + L_ChlorfirstYCorrection) - L_ChlorsecondYCorrection;
    ThirdChlorPipe_Origin[2] - L_ThirdPipe
], [0; 180; 180]*deg, ND_CoagPiping, PS_Modules)
Coag2CoagPipe1 := PipeF([
    ThirdCoagPipe_Origin[0];
    ThirdCoagPipe_Origin[1] - ElbowRadius(ND_CoagPiping);
    ThirdCoagPipe_Origin[2] - L_ThirdPipe
], L_Coag2CoagPipe, [90; 0]*deg, ND_CoagPiping, PS_Modules)
Coag2CoagPipe2 := PipeF([
    ThirdCoagPipe_Origin[0];
    ThirdCoagPipe_Origin[1] - ElbowRadius(ND_CoagPiping) - L_Coag2CoagPipe - TeeLength(ND_CoagPiping);
    ThirdCoagPipe_Origin[2] - L_ThirdPipe
], L_Coag2CoagPipe, [90; 0]*deg, ND_CoagPiping, PS_Modules)
CoagTeePipe := PipeF([
    ThirdCoagPipe_Origin[0] + ShortTeeLength(ND_CoagPiping);
    ThirdCoagPipe_Origin[1] - ElbowRadius(ND_CoagPiping) - L_Coag2CoagPipe - 0.5*TeeLength(ND_CoagPiping);
    ThirdCoagPipe_Origin[2] - L_ThirdPipe
], L_FirstPipe, [180; 0]*deg, ND_CoagPiping, PS_Modules)
CoagYPipe := PipeF([
    ThirdCoagPipe_Origin[0] + ShortTeeLength(ND_CoagPiping) + L_FirstPipe + ElbowRadius(ND_CoagPiping);
    ThirdCoagPipe_Origin[1] - 2*ElbowRadius(ND_CoagPiping) - L_Coag2CoagPipe - 0.5*TeeLength(ND_CoagPiping);
    ThirdCoagPipe_Origin[2] - L_ThirdPipe
], L_CoagYCorrection, [90; 0]*deg, ND_CoagPiping, PS_Modules)
CoagXPipe := PipeF([
    ThirdCoagPipe_Origin[0] + ShortTeeLength(ND_CoagPiping) + L_FirstPipe + 2*ElbowRadius(ND_CoagPiping);
    ThirdCoagPipe_Origin[1] - 3*ElbowRadius(ND_CoagPiping) - L_Coag2CoagPipe - 0.5*TeeLength(ND_CoagPiping) - L_CoagYCorrection;
    ThirdCoagPipe_Origin[2] - L_ThirdPipe
], L_CoagXCorrection, [180; 0]*deg, ND_CoagPiping, PS_Modules)
ChlorfirstXPipe := PipeF([
    ChlorineTank_Origin[0] + ShortTeeLength(ND_CoagPiping);
    ChlorineTank_Origin[1] + .5*(2*(S_ChemTankBorder + R_ChlorineTank + T_ChemTankWall) - W_EtChemPlatform);
    ThirdChlorPipe_Origin[2] - L_ThirdPipe
], L_ChlorfirstXCorrection, [180; 0]*deg, ND_CoagPiping, PS_Modules)
ChlorsecondXPipe := PipeF([
    (ChlorineTank_Origin[0] + ShortTeeLength(ND_CoagPiping)) + L_ChlorfirstXCorrection + ElbowRadius(ND_CoagPiping) + ElbowRadius(ND_CoagPiping);
    (ChlorineTank_Origin[1] + .5*(2*(S_ChemTankBorder + R_ChlorineTank + T_ChemTankWall) - W_EtChemPlatform) + ElbowRadius(ND_CoagPiping)) + L_ChlorfirstYCorrection + ElbowRadius(ND_CoagPiping);
    ThirdChlorPipe_Origin[2] - L_ThirdPipe
], L_ChlorsecondXCorrection, [180; 0]*deg, ND_CoagPiping, PS_Modules)
ChlorfirstYPipe := PipeF([
    (ChlorineTank_Origin[0] + ShortTeeLength(ND_CoagPiping)) + L_ChlorfirstXCorrection + ElbowRadius(ND_CoagPiping);
    ChlorineTank_Origin[1] + .5*(2*(S_ChemTankBorder + R_ChlorineTank + T_ChemTankWall) - W_EtChemPlatform) + ElbowRadius(ND_CoagPiping);
    ThirdChlorPipe_Origin[2] - L_ThirdPipe
], L_ChlorfirstYCorrection, [270; 0]*deg, ND_CoagPiping, PS_Modules)
ChlorsecondYPipe := PipeF([
    ((ChlorineTank_Origin[0] + ShortTeeLength(ND_CoagPiping)) + L_ChlorfirstXCorrection + ElbowRadius(ND_CoagPiping) + 2*ElbowRadius(ND_CoagPiping)) + L_ChlorsecondXCorrection;
    (ChlorineTank_Origin[1] + .5*(2*(S_ChemTankBorder + R_ChlorineTank + T_ChemTankWall) - W_EtChemPlatform) + ElbowRadius(ND_CoagPiping)) + L_ChlorfirstYCorrection;
    ThirdChlorPipe_Origin[2] - L_ThirdPipe
], L_ChlorsecondYCorrection, [90; 0]*deg, ND_CoagPiping, PS_Modules)
ChlorthirdXPipe := PipeF([
    ((ChlorineTank_Origin[0] + ShortTeeLength(ND_CoagPiping)) + L_ChlorfirstXCorrection + ElbowRadius(ND_CoagPiping) + 2*ElbowRadius(ND_CoagPiping)) + L_ChlorsecondXCorrection + ElbowRadius(ND_CoagPiping);
    ((ChlorineTank_Origin[1] + .5*(2*(S_ChemTankBorder + R_ChlorineTank + T_ChemTankWall) - W_EtChemPlatform) + ElbowRadius(ND_CoagPiping)) + L_ChlorfirstYCorrection) - L_ChlorsecondYCorrection - ElbowRadius(ND_CoagPiping);
    ThirdChlorPipe_Origin[2] - L_ThirdPipe
], L_ChlorthirdXCorrection, [180; 0]*deg, ND_CoagPiping, PS_Modules)
ChemPiping := stack(LayerNewChemConnections, CoagElbow, CoagElbow2, CoagTee, ChlorTee, CoagElbow3, CoagElbow4, ChlorElbow2, ChlorElbow3, ChlorElbow4, ChlorElbow5, LayerChemConnFrz, LayerNewChemPiping, Coag2CoagPipe1, Coag2CoagPipe2, CoagTeePipe, CoagYPipe, CoagXPipe, ChlorfirstXPipe, ChlorfirstYPipe, ChlorsecondXPipe, ChlorsecondYPipe, ChlorthirdXPipe, LayerChemPipFrz)
# Draw the drainage plumbing
L_CoagDrainXCorrection := R_CoagTank + T_ChemTankWall + S_ChemTankBorder - T_PlantWall - outerdiameter(ND_CoagPiping)
L_CoagDrainYCorrection := 0.5*W_EtChemPlatform - (R_CoagTank + T_ChemTankWall + S_ChemTankBorder) - L_PlatformDrainHole + 1.5*outerdiameter(ND_CoagPiping)
L_ChlorDrainXCorrection := 2*R_CoagTank + 3*T_ChemTankWall + R_ChlorineTank + 2*S_ChemTankBorder - T_PlantWall - outerdiameter(ND_CoagPiping)
L_ChlorDrainYCorrection := 0.5*W_EtChemPlatform - (R_ChlorineTank + T_ChemTankWall + S_ChemTankBorder) - L_PlatformDrainHole + 4.5*outerdiameter(ND_CoagPiping)
L_Chlor2DrainXCorrection := 2*R_CoagTank + 5*T_ChemTankWall + 3*R_ChlorineTank + 3*S_ChemTankBorder - T_PlantWall - outerdiameter(ND_CoagPiping)
L_Chlor2DrainYCorrection := 0.5*W_EtChemPlatform - (R_FilterCoagTank + T_ChemTankWall + S_ChemTankBorder) - L_PlatformDrainHole + 7.5*outerdiameter(ND_CoagPiping)
L_ZCorrection := Z_CoagulantTankBottom - Z_Walkway - L_DrainPipe - outerdiameter(ND_CoagPiping)
L_ConnPipe := T_PlantWall + outerdiameter(ND_CoagPiping) - ElbowRadius(ND_CoagPiping)
LayerNewChemDrainConnections := layer_new("ChemDrainConnectionsPlu", green)
CoagDrainElbow := ElbowF(CoagTank_Origin + [0 m; 0 m; -L_BulkheadFittingEnd - L_MaleInsertEnd - L_DrainPipe + ElbowRadius(ND_CoagPiping)], [90; 270; 0]*deg, ND_CoagPiping, PS_Modules)
CoagDrainElbow2 := ElbowF(CoagTank_Origin + [
    0 m;
    ElbowRadius(ND_CoagPiping) - L_CoagDrainYCorrection;
    -L_BulkheadFittingEnd - L_MaleInsertEnd - L_DrainPipe
], [180; 0; 0]*deg, ND_CoagPiping, PS_Modules)
CoagDrainElbow3 := ElbowF(CoagTank_Origin + [
    L_CoagDrainXCorrection - ElbowRadius(ND_CoagPiping);
    -L_CoagDrainYCorrection;
    -L_BulkheadFittingEnd - L_MaleInsertEnd - L_DrainPipe
], [-90; 0; -90]*deg, ND_CoagPiping, PS_Modules)
CoagDrainElbow4 := ElbowF(CoagTank_Origin + [
    L_CoagDrainXCorrection;
    -L_CoagDrainYCorrection;
    -L_BulkheadFittingEnd - L_MaleInsertEnd - L_DrainPipe - L_ZCorrection + ElbowRadius(ND_CoagPiping)
], [0; 180; 270]*deg, ND_CoagPiping, PS_Modules)
CoagDrainElbow5 := ElbowF(CoagTank_Origin + [
    L_CoagDrainXCorrection + L_BallValve + 2*SocketDepth(ND_CoagPiping) + L_ConnPipe;
    -L_CoagDrainYCorrection;
    -L_BulkheadFittingEnd - L_MaleInsertEnd - L_DrainPipe - L_ZCorrection
], [-90; 0; -90]*deg, ND_CoagPiping, PS_Modules)
ChlorDrainElbow := ElbowF(ChlorineTank_Origin + [0 m; 0 m; -L_BulkheadFittingEnd - L_MaleInsertEnd - L_DrainPipe + ElbowRadius(ND_CoagPiping)], [90; 270; 0]*deg, ND_CoagPiping, PS_Modules)
ChlorDrainElbow2 := ElbowF(ChlorineTank_Origin + [
    0 m;
    ElbowRadius(ND_CoagPiping) - L_ChlorDrainYCorrection;
    -L_BulkheadFittingEnd - L_MaleInsertEnd - L_DrainPipe
], [180; 0; 0]*deg, ND_CoagPiping, PS_Modules)
ChlorDrainElbow3 := ElbowF(ChlorineTank_Origin + [
    L_ChlorDrainXCorrection - ElbowRadius(ND_CoagPiping);
    -L_ChlorDrainYCorrection;
    -L_BulkheadFittingEnd - L_MaleInsertEnd - L_DrainPipe
], [-90; 0; -90]*deg, ND_CoagPiping, PS_Modules)
ChlorDrainElbow4 := ElbowF(ChlorineTank_Origin + [
    L_ChlorDrainXCorrection;
    -L_ChlorDrainYCorrection;
    -L_BulkheadFittingEnd - L_MaleInsertEnd - L_DrainPipe - L_ZCorrection + ElbowRadius(ND_CoagPiping)
], [0; 180; 270]*deg, ND_CoagPiping, PS_Modules)
ChlorDrainElbow5 := ElbowF(ChlorineTank_Origin + [
    L_ChlorDrainXCorrection + L_BallValve + 2*SocketDepth(ND_CoagPiping) + L_ConnPipe;
    -L_ChlorDrainYCorrection;
    -L_BulkheadFittingEnd - L_MaleInsertEnd - L_DrainPipe - L_ZCorrection
], [-90; 0; -90]*deg, ND_CoagPiping, PS_Modules)
Chlor2DrainElbow := ElbowF(ChlorineTank_Origin + [
    -2*R_ChlorineTank - S_ChemTankBorder - 2*T_ChemTankWall;
    0 m;
    -L_BulkheadFittingEnd - L_MaleInsertEnd - L_DrainPipe + ElbowRadius(ND_CoagPiping)
], [90; 270; 0]*deg, ND_CoagPiping, PS_Modules)
Chlor2DrainElbow2 := ElbowF(ChlorineTank_Origin + [
    -2*R_ChlorineTank - S_ChemTankBorder - 2*T_ChemTankWall;
    ElbowRadius(ND_CoagPiping) - L_Chlor2DrainYCorrection;
    -L_BulkheadFittingEnd - L_MaleInsertEnd - L_DrainPipe
], [180; 0; 0]*deg, ND_CoagPiping, PS_Modules)
Chlor2DrainElbow3 := ElbowF(ChlorineTank_Origin + [
    -2*R_ChlorineTank - S_ChemTankBorder - 2*T_ChemTankWall + L_Chlor2DrainXCorrection - ElbowRadius(ND_CoagPiping);
    -L_Chlor2DrainYCorrection;
    -L_BulkheadFittingEnd - L_MaleInsertEnd - L_DrainPipe
], [-90; 0; -90]*deg, ND_CoagPiping, PS_Modules)
Chlor2DrainElbow4 := ElbowF(ChlorineTank_Origin + [
    -2*R_ChlorineTank - S_ChemTankBorder - 2*T_ChemTankWall + L_Chlor2DrainXCorrection;
    -L_Chlor2DrainYCorrection;
    -L_BulkheadFittingEnd - L_MaleInsertEnd - L_DrainPipe - L_ZCorrection + ElbowRadius(ND_CoagPiping)
], [0; 180; 270]*deg, ND_CoagPiping, PS_Modules)
Chlor2DrainElbow5 := ElbowF(ChlorineTank_Origin + [
    -2*R_ChlorineTank - S_ChemTankBorder - 2*T_ChemTankWall + L_Chlor2DrainXCorrection + L_BallValve + 2*SocketDepth(ND_CoagPiping) + L_ConnPipe;
    -L_Chlor2DrainYCorrection;
    -L_BulkheadFittingEnd - L_MaleInsertEnd - L_DrainPipe - L_ZCorrection
], [-90; 0; -90]*deg, ND_CoagPiping, PS_Modules)
CoagDrainBallValve := insertdwg("https://confluence.cornell.edu/download/attachments/173604905/BallValve.dwg", CoagTank_Origin + [
    L_CoagDrainXCorrection + L_ConnPipe - SocketDepth(ND_CoagPiping);
    -L_CoagDrainYCorrection;
    -L_BulkheadFittingEnd - L_MaleInsertEnd - L_DrainPipe - L_ZCorrection
], 1/250, 1/250, -90 deg)
RotateCoagBallValve := Rotate3DLast(CoagTank_Origin + [
    L_CoagDrainXCorrection + L_ConnPipe - SocketDepth(ND_CoagPiping);
    -L_CoagDrainYCorrection;
    -L_BulkheadFittingEnd - L_MaleInsertEnd - L_DrainPipe - L_ZCorrection
], "Y", 90 deg)
ChlorDrainBallValve := insertdwg("https://confluence.cornell.edu/download/attachments/173604905/BallValve.dwg", ChlorineTank_Origin + [
    L_ChlorDrainXCorrection + L_ConnPipe - SocketDepth(ND_CoagPiping);
    -L_ChlorDrainYCorrection;
    -L_BulkheadFittingEnd - L_MaleInsertEnd - L_DrainPipe - L_ZCorrection
], 1/250, 1/250, -90 deg)
RotateChlorBallValve := Rotate3DLast(ChlorineTank_Origin + [
    L_ChlorDrainXCorrection + L_ConnPipe - SocketDepth(ND_CoagPiping);
    -L_ChlorDrainYCorrection;
    -L_BulkheadFittingEnd - L_MaleInsertEnd - L_DrainPipe - L_ZCorrection
], "Y", 90 deg)
Chlor2DrainBallValve := insertdwg("https://confluence.cornell.edu/download/attachments/173604905/BallValve.dwg", ChlorineTank_Origin + [
    -2*R_ChlorineTank - S_ChemTankBorder - 2*T_ChemTankWall + L_Chlor2DrainXCorrection + L_ConnPipe - SocketDepth(ND_CoagPiping);
    -L_Chlor2DrainYCorrection;
    -L_BulkheadFittingEnd - L_MaleInsertEnd - L_DrainPipe - L_ZCorrection
], 1/250, 1/250, -90 deg)
RotateChlor2BallValve := Rotate3DLast(ChlorineTank_Origin + [
    -2*R_ChlorineTank - S_ChemTankBorder - 2*T_ChemTankWall + L_Chlor2DrainXCorrection + L_ConnPipe - SocketDepth(ND_CoagPiping);
    -L_Chlor2DrainYCorrection;
    -L_BulkheadFittingEnd - L_MaleInsertEnd - L_DrainPipe - L_ZCorrection
], "Y", 90 deg)
CoagYDrainPipe := PipeF(CoagTank_Origin + [0 m; -ElbowRadius(ND_CoagPiping); -L_BulkheadFittingEnd - L_MaleInsertEnd - L_DrainPipe], L_CoagDrainYCorrection - 2*ElbowRadius(ND_CoagPiping), [90; 0]*deg, ND_CoagPiping, PS_Modules)
CoagXDrainPipe := PipeF(CoagTank_Origin + [
    ElbowRadius(ND_CoagPiping);
    -L_CoagDrainYCorrection;
    -L_BulkheadFittingEnd - L_MaleInsertEnd - L_DrainPipe
], L_CoagDrainXCorrection - 2*ElbowRadius(ND_CoagPiping), [180; 0]*deg, ND_CoagPiping, PS_Modules)
CoagZDrainPipe := PipeF(CoagTank_Origin + [
    L_CoagDrainXCorrection;
    -L_CoagDrainYCorrection;
    -L_BulkheadFittingEnd - L_MaleInsertEnd - L_DrainPipe - ElbowRadius(ND_CoagPiping)
], L_ZCorrection - 2*ElbowRadius(ND_CoagPiping), [0; 270]*deg, ND_CoagPiping, PS_Modules)
ChlorYDrainPipe := PipeF(ChlorineTank_Origin + [0 m; -ElbowRadius(ND_CoagPiping); -L_BulkheadFittingEnd - L_MaleInsertEnd - L_DrainPipe], L_ChlorDrainYCorrection - 2*ElbowRadius(ND_CoagPiping), [90; 0]*deg, ND_CoagPiping, PS_Modules)
ChlorXDrainPipe := PipeF(ChlorineTank_Origin + [
    ElbowRadius(ND_CoagPiping);
    -L_ChlorDrainYCorrection;
    -L_BulkheadFittingEnd - L_MaleInsertEnd - L_DrainPipe
], L_ChlorDrainXCorrection - 2*ElbowRadius(ND_CoagPiping), [180; 0]*deg, ND_CoagPiping, PS_Modules)
ChlorZDrainPipe := PipeF(ChlorineTank_Origin + [
    L_ChlorDrainXCorrection;
    -L_ChlorDrainYCorrection;
    -L_BulkheadFittingEnd - L_MaleInsertEnd - L_DrainPipe - ElbowRadius(ND_CoagPiping)
], L_ZCorrection - 2*ElbowRadius(ND_CoagPiping), [0; 270]*deg, ND_CoagPiping, PS_Modules)
Chlor2YDrainPipe := PipeF(ChlorineTank_Origin + [
    -2*R_ChlorineTank - S_ChemTankBorder - 2*T_ChemTankWall;
    -ElbowRadius(ND_CoagPiping);
    -L_BulkheadFittingEnd - L_MaleInsertEnd - L_DrainPipe
], L_Chlor2DrainYCorrection - 2*ElbowRadius(ND_CoagPiping), [90; 0]*deg, ND_CoagPiping, PS_Modules)
Chlor2XDrainPipe := PipeF(ChlorineTank_Origin + [
    -2*R_ChlorineTank - S_ChemTankBorder - 2*T_ChemTankWall + ElbowRadius(ND_CoagPiping);
    -L_Chlor2DrainYCorrection;
    -L_BulkheadFittingEnd - L_MaleInsertEnd - L_DrainPipe
], L_Chlor2DrainXCorrection - 2*ElbowRadius(ND_CoagPiping), [180; 0]*deg, ND_CoagPiping, PS_Modules)
Chlor2ZDrainPipe := PipeF(ChlorineTank_Origin + [
    -2*R_ChlorineTank - S_ChemTankBorder - 2*T_ChemTankWall + L_Chlor2DrainXCorrection;
    -L_Chlor2DrainYCorrection;
    -L_BulkheadFittingEnd - L_MaleInsertEnd - L_DrainPipe - ElbowRadius(ND_CoagPiping)
], L_ZCorrection - 2*ElbowRadius(ND_CoagPiping), [0; 270]*deg, ND_CoagPiping, PS_Modules)
CoagConnPipe := PipeF(CoagTank_Origin + [
    L_CoagDrainXCorrection + ElbowRadius(ND_CoagPiping);
    -L_CoagDrainYCorrection;
    -L_BulkheadFittingEnd - L_MaleInsertEnd - L_DrainPipe - L_ZCorrection
], L_ConnPipe - ElbowRadius(ND_CoagPiping), [180; 0]*deg, ND_CoagPiping, PS_Modules)
ChlorConnPipe := PipeF(ChlorineTank_Origin + [
    L_ChlorDrainXCorrection + ElbowRadius(ND_CoagPiping);
    -L_ChlorDrainYCorrection;
    -L_BulkheadFittingEnd - L_MaleInsertEnd - L_DrainPipe - L_ZCorrection
], L_ConnPipe - ElbowRadius(ND_CoagPiping), [180; 0]*deg, ND_CoagPiping, PS_Modules)
Chlor2ConnPipe := PipeF(ChlorineTank_Origin + [
    -2*R_ChlorineTank - S_ChemTankBorder - 2*T_ChemTankWall + L_Chlor2DrainXCorrection + ElbowRadius(ND_CoagPiping);
    -L_Chlor2DrainYCorrection;
    -L_BulkheadFittingEnd - L_MaleInsertEnd - L_DrainPipe - L_ZCorrection
], L_ConnPipe - ElbowRadius(ND_CoagPiping), [180; 0]*deg, ND_CoagPiping, PS_Modules)
CoagConnPipe2 := PipeF(CoagTank_Origin + [
    L_CoagDrainXCorrection + L_BallValve + L_ConnPipe;
    -L_CoagDrainYCorrection;
    -L_BulkheadFittingEnd - L_MaleInsertEnd - L_DrainPipe - L_ZCorrection
], 2*SocketDepth(ND_CoagPiping), [180; 0]*deg, ND_CoagPiping, PS_Modules)
ChlorConnPipe2 := PipeF(ChlorineTank_Origin + [
    L_ChlorDrainXCorrection + L_BallValve + L_ConnPipe;
    -L_ChlorDrainYCorrection;
    -L_BulkheadFittingEnd - L_MaleInsertEnd - L_DrainPipe - L_ZCorrection
], 2*SocketDepth(ND_CoagPiping), [180; 0]*deg, ND_CoagPiping, PS_Modules)
Chlor2ConnPipe2 := PipeF(ChlorineTank_Origin + [
    -2*R_ChlorineTank - S_ChemTankBorder - 2*T_ChemTankWall + L_Chlor2DrainXCorrection + L_BallValve + L_ConnPipe;
    -L_Chlor2DrainYCorrection;
    -L_BulkheadFittingEnd - L_MaleInsertEnd - L_DrainPipe - L_ZCorrection
], 2*SocketDepth(ND_CoagPiping), [180; 0]*deg, ND_CoagPiping, PS_Modules)
ThawDrainPieces := ThawMultiple(["ChemDrainConnectionsPlu"; "ChemDrainPipingPlu"])
MirrorDrainPieces := MirrorAll([
    CoagTank_Origin[0] - (R_CoagTank + T_ChemTankWall) + zc;
    CoagTank_Origin[1] + R_CoagTank + T_ChemTankWall + S_ChemTankBorder - 0.5*W_EtChemPlatform
], [
    CoagTank_Origin[0] - (R_CoagTank + T_ChemTankWall) - zc;
    CoagTank_Origin[1] + R_CoagTank + T_ChemTankWall + S_ChemTankBorder - 0.5*W_EtChemPlatform
], "n")
FreezeDrainPieces := FreezeMultiple(["ChemDrainConnectionsPlu"; "ChemDrainPipingPlu"])
ChemDrainPiping := stack(LayerNewChemDrainConnections, CoagDrainElbow, CoagDrainElbow2, CoagDrainElbow3, CoagDrainElbow4, CoagDrainElbow5, ChlorDrainElbow, ChlorDrainElbow2, ChlorDrainElbow3, ChlorDrainElbow4, ChlorDrainElbow5, Chlor2DrainElbow, Chlor2DrainElbow2, Chlor2DrainElbow3, Chlor2DrainElbow4, Chlor2DrainElbow5, CoagDrainBallValve, RotateCoagBallValve, ChlorDrainBallValve, RotateChlorBallValve, Chlor2DrainBallValve, RotateChlor2BallValve, LayerChemConnFrz, LayerNewChemDrainPiping, CoagYDrainPipe, CoagXDrainPipe, CoagZDrainPipe, ChlorYDrainPipe, ChlorXDrainPipe, ChlorZDrainPipe, Chlor2YDrainPipe, Chlor2XDrainPipe, Chlor2ZDrainPipe, CoagConnPipe, ChlorConnPipe, Chlor2ConnPipe, CoagConnPipe2, ChlorConnPipe2, Chlor2ConnPipe2, LayerChemDrainPipingFrz, ThawDrainPieces, MirrorDrainPieces, FreezeDrainPieces)
ChemDrainPipingNoFC := stack(LayerNewChemDrainConnections, CoagDrainElbow, CoagDrainElbow2, CoagDrainElbow3, CoagDrainElbow4, CoagDrainElbow5, ChlorDrainElbow, ChlorDrainElbow2, ChlorDrainElbow3, ChlorDrainElbow4, ChlorDrainElbow5, CoagDrainBallValve, RotateCoagBallValve, ChlorDrainBallValve, RotateChlorBallValve, LayerChemConnFrz, LayerNewChemDrainPiping, CoagYDrainPipe, CoagXDrainPipe, CoagZDrainPipe, ChlorYDrainPipe, ChlorXDrainPipe, ChlorZDrainPipe, CoagConnPipe, ChlorConnPipe, CoagConnPipe2, ChlorConnPipe2, LayerChemDrainPipingFrz, ThawDrainPieces, MirrorDrainPieces, FreezeDrainPieces)
AC_ChemTanks := stack(ChemMasonryScript, ChemTankScript, ChemCoagPlumbingScript, ChemChlorPlumbingScript, ChemTanksReflectRotateScript)
