W_ChemStairs := 1 m
ND_CoagPiping := 1/2*in
H_ChemPlatformWall := 1 m
# Chemical Stock Tank AutoCAD
Z_ChemPlatform := Z_CoagulantTankBottom - T_ChemTankWall
# Layers
OpChemPlatformLayer := layer_new("OpChemPlatformCon", grey)
SelectOpChemPlatform := SelectLayer("OpChemPlatformCon")
OpChemPlatformFrz := FreezeLayer("OpChemPlatformCon")
SubtractFromOpChemPlatform := SubtractF(["OpChemPlatformCon"], "DeleteMe")
ChemCoagTankLayer := layer_new("ChemCoagTank", purple)
SelectChemCoagTank := SelectLayer("ChemCoagTank")
ChemCoagTankFrz := FreezeLayer("ChemCoagTank")
SubtractFromChemCoagTank := SubtractF(["ChemCoagTank"], "DeleteMe")
ChemChlorineTankLayer := layer_new("ChemChlorineTank", ltpurple)
SelectChemChlorineTank := SelectLayer("ChemChlorineTank")
ChemChlorineTankFrz := FreezeLayer("ChemChlorineTank")
SubtractFromChemChlorineTank := SubtractF(["ChemChlorineTank"], "DeleteMe")
ChemCoagFittingLayer := layer_new("ChemCoagFittingPlu", green)
SelectChemCoagFitting := SelectLayer("ChemCoagFittingPlu")
ChemCoagFittingFrz := FreezeLayer("ChemCoagFittingPlu")
ChemCoagPipeLayer := layer_new("ChemCoagPipePlu", blue)
SelectChemCoagPipe := SelectLayer("ChemCoagPipePlu")
ChemCoagPipeFrz := FreezeLayer("ChemCoagPipePlu")
ChemChlorineFittingLayer := layer_new("ChemChlorineFittingPlu", green)
SelectChemChlorineFitting := SelectLayer("ChemChlorineFittingPlu")
ChemChlorineFittingFrz := FreezeLayer("ChemChlorineFittingPlu")
ChemChlorinePipeLayer := layer_new("ChemChlorinePipePlu", blue)
SelectChemChlorinePipe := SelectLayer("ChemChlorinePipePlu")
ChemChlorinePipeFrz := FreezeLayer("ChemChlorinePipePlu")
ChemDrainFittingLayer := layer_new("ChemDrainFittingPlu", green)
SelectChemDrainFitting := SelectLayer("ChemDrainFittingPlu")
ChemDrainFittingFrz := FreezeLayer("ChemDrainFittingPlu")
ChemDrainPipeLayer := layer_new("ChemDrainPipePlu", blue)
SelectChemDrainPipe := SelectLayer("ChemDrainPipePlu")
ChemDrainPipeFrz := FreezeLayer("ChemDrainPipePlue")
# Length Assignments
R_TankOutlet := .75 in
L_FirstPipe := 0.03 m
L_SecondPipe := 0.03 m
L_ThirdPipe := B_StockOutlet + T_PlantWall + T_ChemTankWall + outerdiameter(ND_CoagPiping) - ElbowRadius(ND_CoagPiping)
L_ThirdPipe1 := L_ThirdPipe - ElbowRadius(ND_CoagPiping)
L_ThirdPipe2 := L_ThirdPipe - ShortTeeLength(ND_CoagPiping)
L_BulkheadFittingEnd := 0.35*3/250*in
L_BallValve := 450/250*in
L_MaleInsertEnd := 3/4*3/250*in
L_DrainPipe := T_PlantWall + T_ChemTankWall + 3*outerdiameter(ND_CoagPiping) - L_BulkheadFittingEnd - L_MaleInsertEnd
# Chemical platform masonry
# Dimension calculations
W_ChemPlatform := Et_Origin[0] - L_Et - T_PlantWall - W_DCWalkway - T_PlantWall - (Fi_origin[0] - L_Fi - T_FiWall + T_PlantWall)  # X dimension
L_ChemPlatform := Et_Origin[1] + W_Et - (Fi_origin[1] + N_Fi*(W_Fi + T_FiWall) + W_BasementStairs + T_PlantWall + W_EntranceStairs + T_PlantWall + W_ChemStairs + T_PlantWall)
# Y dimension
H_ChemStairs := Z_ChemPlatform - Z_Walkway
L_ChemStairs := L_Stairs(H_ChemStairs)
# Slab and stair origins and dimensions
ChemPlatformFloor_Origin := [Et_Origin[0] - L_Et - T_PlantWall - W_DCWalkway - T_PlantWall; Et_Origin[1] + W_Et; Z_ChemPlatform]
ChemPlatformFloor_Dim := [-W_ChemPlatform; -L_ChemPlatform; -T_PlantWall]
ChemStairLanding_Origin := ChemPlatformFloor_Origin + [-W_ChemPlatform; -L_ChemPlatform; 0 m]
ChemStairLanding_Dim := [W_ChemPlatform - L_ChemStairs; -T_PlantWall - W_ChemStairs; -T_PlantWall]
ChemStairs_Origin := ChemPlatformFloor_Origin + [-L_ChemStairs; -L_ChemPlatform - T_PlantWall; 0 m]
H_ChemWallsTotal := Z_ChemPlatform + H_ChemPlatformWall - Z_Walkway
# Chem platform slabs
ChemPlatformFloor := BoxF(ChemPlatformFloor_Origin, ChemPlatformFloor_Origin + ChemPlatformFloor_Dim, [0; 0; 0]*deg)
ChemStairLanding := BoxF(ChemStairLanding_Origin, ChemStairLanding_Origin + ChemStairLanding_Dim, [0; 0; 0]*deg)
ChemStairs := StairsF(ChemStairs_Origin, W_ChemStairs + T_PlantWall, H_ChemStairs, 0 deg)
ChemSlabScript := stack(OpChemPlatformLayer, ChemPlatformFloor, ChemStairLanding, ChemStairs)
# Wall origins and dimensions
ChemPlatformEastWall_Origin := [ChemPlatformFloor_Origin[0]; ChemPlatformFloor_Origin[1] + T_PlantWall; Z_Walkway]
ChemPlatformEastWall_Dim := [T_PlantWall; -2*T_PlantWall - L_ChemPlatform; H_ChemWallsTotal]
ChemPlatformNorthWall_Origin := [ChemPlatformFloor_Origin[0] + T_PlantWall; ChemPlatformFloor_Origin[1]; Z_Walkway]
ChemPlatformNorthWall_Dim := [-2*T_PlantWall - W_ChemPlatform; T_PlantWall; H_ChemWallsTotal]
ChemPlatformWestWall_Origin := [ChemPlatformFloor_Origin[0] - W_ChemPlatform; ChemPlatformFloor_Origin[1] + T_PlantWall; Z_Walkway]
ChemPlatformWestWall_Dim := [-T_PlantWall; -3*T_PlantWall - L_ChemPlatform - W_ChemStairs; H_ChemWallsTotal]
ChemPlatformSouthWall1_Origin := [ChemPlatformFloor_Origin[0] + T_PlantWall; ChemPlatformFloor_Origin[1] - L_ChemPlatform; Z_Walkway]
ChemPlatformSouthWall1_Dim := [-T_PlantWall - L_ChemStairs; -T_PlantWall; H_ChemWallsTotal]
ChemPlatformSouthWall2_Origin := [
    ChemPlatformFloor_Origin[0] - W_ChemPlatform - T_PlantWall;
    ChemPlatformFloor_Origin[1] - L_ChemPlatform - W_ChemStairs - T_PlantWall;
    Z_Walkway
]
ChemPlatformSouthWall2_Dim := [W_ChemPlatform - L_ChemStairs + T_PlantWall; -T_PlantWall; H_ChemWallsTotal]
ChemStairWall1_Origin := [
    ChemPlatformFloor_Origin[0];
    ChemPlatformFloor_Origin[1] - L_ChemPlatform - T_PlantWall - W_ChemStairs;
    Z_Walkway
]
ChemStairWall1_Dim := [
    -sqrt(L_ChemStairs^2 + H_ChemStairs^2) - H_ChemPlatformWall*cos(atan(L_ChemStairs/H_ChemStairs));
    -T_PlantWall;
    H_ChemPlatformWall*sin(atan(L_ChemStairs/H_ChemStairs))
]
ChemStairWall2_Origin := [
    ChemPlatformFloor_Origin[0] - L_ChemStairs;
    ChemPlatformFloor_Origin[1] - L_ChemPlatform - T_PlantWall - W_ChemStairs;
    Z_Walkway
]
ChemStairWall2_Dim := [L_ChemStairs - T_PlantWall; -T_PlantWall; H_ChemStairs - T_PlantWall]
# Platform walls
ChemEastWall := BoxF(ChemPlatformEastWall_Origin, ChemPlatformEastWall_Origin + ChemPlatformEastWall_Dim, [0; 0; 0]*deg)
ChemNorthWall := BoxF(ChemPlatformNorthWall_Origin, ChemPlatformNorthWall_Origin + ChemPlatformNorthWall_Dim, [0; 0; 0]*deg)
ChemWestWall := BoxF(ChemPlatformWestWall_Origin, ChemPlatformWestWall_Origin + ChemPlatformWestWall_Dim, [0; 0; 0]*deg)
ChemSouthWall1 := BoxF(ChemPlatformSouthWall1_Origin, ChemPlatformSouthWall1_Origin + ChemPlatformSouthWall1_Dim, [0; 0; 0]*deg)
ChemSouthWall2 := BoxF(ChemPlatformSouthWall2_Origin, ChemPlatformSouthWall2_Origin + ChemPlatformSouthWall2_Dim, [0; 0; 0]*deg)
ChemStairWall1 := BoxF(ChemStairWall1_Origin, ChemStairWall1_Origin + ChemStairWall1_Dim, [0 deg; atan(H_ChemStairs/L_ChemStairs); 0 deg])
ChemStairWall2 := WedgeF(ChemStairWall2_Origin, ChemStairWall2_Origin + ChemStairWall2_Dim, [0 deg; 0 deg; 0 deg])
ChemStairWallCut1 := BoxF(ChemStairWall1_Origin, ChemStairWall1_Origin + [
    H_ChemPlatformWall*sin(atan(L_ChemStairs/H_ChemStairs)) + zc;
    -T_PlantWall;
    T_PlantWall + H_ChemPlatformWall + zc
], [0; 0; 0]*deg)
ChemStairWallCut2 := WedgeF(ChemStairWall2_Origin + [0 m; W_ChemStairs + T_PlantWall; 0 m], ChemStairWall2_Origin + [0 m; W_ChemStairs + T_PlantWall; 0 m] + ChemStairWall2_Dim, [0 deg; 0 deg; 0 deg])
ChemWallScript := stack(ChemEastWall, ChemNorthWall, ChemWestWall, ChemSouthWall1, ChemSouthWall2, ChemStairWall1, ChemStairWall2, Union_All, OpChemPlatformFrz, ChemStairWallCut1, ChemStairWallCut2, GroupDelete, SubtractFromOpChemPlatform)
ChemMasonryScript := stack(ChemSlabScript, ChemWallScript)
L_PlatformDrainHole := 9*outerdiameter(ND_CoagPiping)
W_PlatformHole := 4*outerdiameter(ND_CoagPiping)
# This is the hole in the platform wall through which the pipes travel to reach the constant head tank. This is used again in OperatorAccessAC to subtract the hole from the wall.
L_PlatformHole := 6*outerdiameter(ND_CoagPiping)
L_MaleInsertToHoleCenter := ElbowRadius(ND_CoagPiping) + L_BallValve + L_FirstPipe + L_SecondPipe
ChemWallHole_Origin := [
    CoagTank_Origin[0] + R_CoagTank + T_ChemTankWall + S_ChemTankBorder - T_PlantWall;
    Et_Origin[1] + W_Et + 1/2*T_PlantWall - W_EtChemPlatform + 2*L_PlatformHole;
    CoagTank_Origin[2] - T_ChemTankWall - T_PlantWall - W_PlatformHole
]
R_Hole := outerdiameter(AvailND[index2(ND_CoagPiping, AvailND)])/2
PlatformStairs := Stairs(ChemStairs_Origin, W_ChemStairs, H_ChemStairs, 0 deg)
SubtractDrainWallBox := BoxF([
    ChemPlatformWall_Origin[0] - T_PlantWall;
    ChemPlatform_Origin[1] + 0.5*W_EtChemPlatform - L_PlatformDrainHole - 0.5*T_PlantWall;
    ChemPlatformWall_Origin[2]
], [
    ChemPlatformWall_Origin[0] + T_PlantWall;
    ChemPlatform_Origin[1] + 0.5*W_EtChemPlatform + L_PlatformDrainHole - 0.5*T_PlantWall;
    ChemPlatformWall_Origin[2] + W_PlatformHole
], [0; 0; 0]*deg)
SubtractDoseWallBox := BoxF(ChemWallHole_Origin, [
    ChemPlatformWall_Origin[0] + T_PlantWall;
    ChemPlatformWall_Origin[1] + 3*L_PlatformHole;
    ChemPlatform_Origin[2]
], [0; 0; 0]*deg)
# Chem storage tanks
# Origin points
CoagTank_Origin := ChemPlatformFloor_Origin + [-S_ChemTankBorder - R_CoagTank; -S_ChemTankBorder - R_CoagTank; T_ChemTankWall]
ChlorineTank_Origin := CoagTank_Origin + [-3*R_CoagTank - 2*S_ChemTankBorder - R_ChlorineTank; R_CoagTank - R_ChlorineTank; 0 m]
CoagOutlet_Origin := [
    CoagTank_Origin[0] - sqrt(2)/2*R_CoagTank;
    CoagTank_Origin[1] - sqrt(2)/2*R_CoagTank;
    Z_CoagulantOutlet
]
ChlorOutlet_Origin := [
    ChlorineTank_Origin[0] - sqrt(2)/2*R_ChlorineTank;
    ChlorineTank_Origin[1] - sqrt(2)/2*R_ChlorineTank;
    Z_CoagulantOutlet
]
L_ChemTanksTotal := 4*R_CoagTank + 4*R_ChlorineTank + 5*S_ChemTankBorder
# First coagulant tank
CoagOuterTankWall := CylinderF(CoagTank_Origin - [0 m; 0 m; T_ChemTankWall], R_CoagTank, H_CoagTank, [0; 90]*deg)
CoagInnerTankWall := CylinderF(CoagTank_Origin, R_CoagTank - T_ChemTankWall, H_CoagTank, [0; 90]*deg)
CoagOutletCut := CylinderF(CoagOutlet_Origin + [-sqrt(2)/2*zc; -sqrt(2)/2*zc; 0 m], R_TankOutlet, 2*zc + T_ChemTankWall, [-135; 0]*deg)
CoagDrainCut := CylinderF(CoagTank_Origin + [0 m; 0 m; zc], R_TankOutlet, 2*zc + T_ChemTankWall, [0; 270]*deg)
CoagTankScript := stack(ChemCoagTankLayer, CoagOuterTankWall, ChemCoagTankFrz, CoagInnerTankWall, CoagOutletCut, CoagDrainCut, GroupDelete, SubtractFromChemCoagTank)
# First chlorine tank
ChlorOuterTankWall := CylinderF(ChlorineTank_Origin - [0 m; 0 m; T_ChemTankWall], R_ChlorineTank, H_ChlorineTank, [0; 90]*deg)
ChlorInnerTankWall := CylinderF(ChlorineTank_Origin, R_ChlorineTank - T_ChemTankWall, H_ChlorineTank, [0; 90]*deg)
ChlorOutletCut := CylinderF(ChlorOutlet_Origin + [-sqrt(2)/2*zc; -sqrt(2)/2*zc; 0 m], R_TankOutlet, 2*zc + T_ChemTankWall, [-135; 0]*deg)
ChlorDrainCut := CylinderF(ChlorineTank_Origin + [0 m; 0 m; zc], R_TankOutlet, 2*zc + T_ChemTankWall, [0; 270]*deg)
ChlorTankScript := stack(ChemChlorineTankLayer, ChlorOuterTankWall, ChemChlorineTankFrz, ChlorInnerTankWall, ChlorOutletCut, ChlorDrainCut, GroupDelete, SubtractFromChemChlorineTank)
ChemTankScript := stack(CoagTankScript, ChlorTankScript)
# Plumbing origin points
ChlorMaleInsert_Origin := [
    ChlorOutlet_Origin[0] - sqrt(2)/2*L_BulkheadFittingEnd;
    ChlorOutlet_Origin[1] - sqrt(2)/2*L_BulkheadFittingEnd;
    ChlorOutlet_Origin[2]
]
CoagMaleInsert_Origin := [
    CoagOutlet_Origin[0] - sqrt(2)/2*L_BulkheadFittingEnd;
    CoagOutlet_Origin[1] - sqrt(2)/2*L_BulkheadFittingEnd;
    CoagOutlet_Origin[2]
]
FirstChlorPipe_Origin := [
    ChlorMaleInsert_Origin[0] - sqrt(2)/2*L_MaleInsertEnd;
    ChlorMaleInsert_Origin[1] - sqrt(2)/2*L_MaleInsertEnd;
    ChlorMaleInsert_Origin[2]
]
FirstCoagPipe_Origin := [
    CoagMaleInsert_Origin[0] - sqrt(2)/2*L_MaleInsertEnd;
    CoagMaleInsert_Origin[1] - sqrt(2)/2*L_MaleInsertEnd;
    CoagMaleInsert_Origin[2]
]
ChlorBallValve_Origin := [
    FirstChlorPipe_Origin[0] - sqrt(2)/2*L_FirstPipe;
    FirstChlorPipe_Origin[1] - sqrt(2)/2*L_FirstPipe;
    FirstChlorPipe_Origin[2]
]
CoagBallValve_Origin := [
    FirstCoagPipe_Origin[0] - sqrt(2)/2*L_FirstPipe;
    FirstCoagPipe_Origin[1] - sqrt(2)/2*L_FirstPipe;
    FirstCoagPipe_Origin[2]
]
SecondChlorPipe_Origin := [
    ChlorBallValve_Origin[0] - sqrt(2)/2*L_BallValve;
    ChlorBallValve_Origin[1] - sqrt(2)/2*L_BallValve;
    ChlorBallValve_Origin[2]
]
SecondCoagPipe_Origin := [
    CoagBallValve_Origin[0] - sqrt(2)/2*L_BallValve;
    CoagBallValve_Origin[1] - sqrt(2)/2*L_BallValve;
    CoagBallValve_Origin[2]
]
FirstChlorElbow_Origin := [
    SecondChlorPipe_Origin[0] - sqrt(2)/2*L_SecondPipe;
    SecondChlorPipe_Origin[1] - sqrt(2)/2*L_SecondPipe;
    SecondChlorPipe_Origin[2]
]
FirstCoagElbow_Origin := [
    SecondCoagPipe_Origin[0] - sqrt(2)/2*L_SecondPipe;
    SecondCoagPipe_Origin[1] - sqrt(2)/2*L_SecondPipe;
    SecondCoagPipe_Origin[2]
]
ThirdChlorPipe_Origin := [
    FirstChlorElbow_Origin[0] - sqrt(2)/2*ElbowRadius(ND_CoagPiping);
    FirstChlorElbow_Origin[1] - sqrt(2)/2*ElbowRadius(ND_CoagPiping);
    FirstChlorElbow_Origin[2] - ElbowRadius(ND_CoagPiping)
]
ThirdCoagPipe_Origin := [
    FirstCoagElbow_Origin[0] - sqrt(2)/2*ElbowRadius(ND_CoagPiping);
    FirstCoagElbow_Origin[1] - sqrt(2)/2*ElbowRadius(ND_CoagPiping);
    FirstCoagElbow_Origin[2] - ElbowRadius(ND_CoagPiping)
]
# Coagulant tank plumbing
# Coagulant fittings
CoagBulkheadFitting := insertdwg("https://confluence.cornell.edu/download/attachments/173604905/BulkheadFittingScaled.dwg", CoagOutlet_Origin, 3/250, 3/250, 315 deg)
CoagMaleInsert := insertdwg("https://confluence.cornell.edu/download/attachments/173604905/MaleInsert.dwg", CoagMaleInsert_Origin, 3/250, 3/250, 315 deg)
CoagBallValve := insertdwg("https://confluence.cornell.edu/download/attachments/173604905/BallValve.dwg", CoagBallValve_Origin, 1/250, 1/250, 0 deg)
RotateBallValve := Rotate3DLast(CoagBallValve_Origin, "X", 270 deg)
RotateBallValve2 := Rotate3DLast(CoagBallValve_Origin, "Z", 135 deg)
CoagDrainBulkheadFitting := insertdwg("https://confluence.cornell.edu/download/attachments/173604905/BulkheadFittingScaled.dwg", CoagTank_Origin, 3/250, 3/250, 0 deg)
RotateBulkheadFitting := Rotate3DLast(CoagTank_Origin, "X", 90 deg)
CoagDrainMaleInsert := insertdwg("https://confluence.cornell.edu/download/attachments/173604905/MaleInsert.dwg", CoagTank_Origin + [0 m; 0 m; -L_BulkheadFittingEnd], 3/250, 3/250, 0 deg)
RotateMaleInsert := Rotate3DLast(CoagTank_Origin + [0 m; 0 m; -L_BulkheadFittingEnd], "X", 90 deg)
ChemCoagFittingScript := stack(ChemCoagFittingLayer, CoagBulkheadFitting, CoagMaleInsert, CoagBallValve, RotateBallValve, RotateBallValve2, CoagDrainBulkheadFitting, RotateBulkheadFitting, CoagDrainMaleInsert, RotateMaleInsert, ChemCoagFittingFrz)
# Coagulant pipes
FirstCoagTankPipe := PipeF(FirstCoagPipe_Origin, L_FirstPipe, [45; 0]*deg, ND_CoagPiping, PS_Modules)
SecondCoagPipe := PipeF(SecondCoagPipe_Origin, L_SecondPipe, [45; 0]*deg, ND_CoagPiping, PS_Modules)
ChemCoagPipeScript := stack(ChemCoagPipeLayer, FirstCoagTankPipe, SecondCoagPipe, ChemCoagPipeFrz)
ChemCoagPlumbingScript := stack(ChemCoagFittingScript, ChemCoagPipeScript)
# Chlorine tank plumbing
# Chlorine fittings
ChlorBulkheadFitting := insertdwg("https://confluence.cornell.edu/download/attachments/173604905/BulkheadFittingScaled.dwg", ChlorOutlet_Origin, 3/250, 3/250, 315 deg)
ChlorMaleInsert := insertdwg("https://confluence.cornell.edu/download/attachments/173604905/MaleInsert.dwg", ChlorMaleInsert_Origin, 3/250, 3/250, 315 deg)
ChlorBallValve := insertdwg("https://confluence.cornell.edu/download/attachments/173604905/BallValve.dwg", ChlorBallValve_Origin, 1/250, 1/250, 0 deg)
RotateBallValve := Rotate3DLast(ChlorBallValve_Origin, "X", 270 deg)
RotateBallValve2 := Rotate3DLast(ChlorBallValve_Origin, "Z", 135 deg)
ChlorDrainBulkheadFitting := insertdwg("https://confluence.cornell.edu/download/attachments/173604905/BulkheadFittingScaled.dwg", ChlorineTank_Origin, 3/250, 3/250, 0 deg)
RotateBulkheadFitting := Rotate3DLast(ChlorineTank_Origin, "X", 90 deg)
ChlorDrainMaleInsert := insertdwg("https://confluence.cornell.edu/download/attachments/173604905/MaleInsert.dwg", ChlorineTank_Origin + [0 m; 0 m; -L_BulkheadFittingEnd], 3/250, 3/250, 0 deg)
RotateMaleInsert := Rotate3DLast(ChlorineTank_Origin + [0 m; 0 m; -L_BulkheadFittingEnd], "X", 90 deg)
ChemChlorFittingScript := stack(ChemChlorineFittingLayer, ChlorBulkheadFitting, ChlorMaleInsert, ChlorBallValve, RotateBallValve, RotateBallValve2, ChlorDrainBulkheadFitting, RotateBulkheadFitting, ChlorDrainMaleInsert, RotateMaleInsert, ChemChlorineFittingFrz)
# Chlorine pipes
FirstChlorPipe := PipeF(FirstChlorPipe_Origin, L_FirstPipe, [45; 0]*deg, ND_CoagPiping, PS_Modules)
SecondChlorPipe := PipeF(SecondChlorPipe_Origin, L_SecondPipe, [45; 0]*deg, ND_CoagPiping, PS_Modules)
ChemChlorPipeScript := stack(ChemChlorinePipeLayer, FirstChlorPipe, SecondChlorPipe, ChemChlorinePipeFrz)
ChemChlorPlumbingScript := stack(ChemChlorFittingScript, ChemChlorPipeScript)
# Reflect the first coagulant and chlorine tanks and associated plumbing
ThawCoagPieces := ThawMultiple(["ChemCoagTank"; "ChemCoagFittingPlu"; "ChemCoagPipePlu"])
MirrorCoagPieces := MirrorAll([CoagTank_Origin[0] - R_CoagTank - S_ChemTankBorder/2; CoagTank_Origin[1]], [CoagTank_Origin[0] - R_CoagTank - S_ChemTankBorder/2; CoagTank_Origin[1] + zc], "n")
FreezeCoagPieces := FreezeMultiple(["ChemCoagTank"; "ChemCoagFittingPlu"; "ChemCoagPipePlu"])
ThawChlorinePieces := ThawMultiple(["ChemChlorineTank"; "ChemChlorineFittingPlu"; "ChemChlorinePipePlu"])
MirrorChlorinePieces := MirrorAll([ChlorineTank_Origin[0] - R_ChlorineTank - S_ChemTankBorder/2; ChlorineTank_Origin[1]], [ChlorineTank_Origin[0] - R_ChlorineTank - S_ChemTankBorder/2; ChlorineTank_Origin[1] + zc], "n")
FreezeChlorinePieces := FreezeMultiple(["ChemChlorineTank"; "ChemChlorineFittingPlu"; "ChemChlorinePipePlu"])
ChemReflectScript := stack(ThawCoagPieces, MirrorCoagPieces, FreezeCoagPieces, ThawChlorinePieces, MirrorChlorinePieces, FreezeChlorinePieces)
ThawChemPieces := ThawMultiple(["ChemCoagTank"; "ChemCoagPipePlu"; "ChemCoagFittingPlu"; "ChemChlorineTank"; "ChemChlorineFittingPlu"; "ChemChlorinePipePlu"])
CoagDrainPlatformCut1 := CylinderF(CoagTank_Origin + [0 m; 0 m; -T_ChemTankWall - T_PlantWall - zc], outerradius(3 in), T_PlantWall + 2*zc, [0; 90]*deg)
CoagDrainPlatformCut2 := CylinderF(CoagTank_Origin + [-2*R_CoagTank - S_ChemTankBorder; 0 m; -T_ChemTankWall - T_PlantWall - zc], outerradius(3 in), T_PlantWall + 2*zc, [0; 90]*deg)
ChlorineDrainPlatformCut1 := CylinderF(ChlorineTank_Origin + [0 m; 0 m; -T_ChemTankWall - T_PlantWall - zc], outerradius(3 in), T_PlantWall + 2*zc, [0; 90]*deg)
ChlorineDrainPlatformCut2 := CylinderF(ChlorineTank_Origin + [-2*R_ChlorineTank - S_ChemTankBorder; 0 m; -T_ChemTankWall - T_PlantWall - zc], outerradius(3 in), T_PlantWall + 2*zc, [0; 90]*deg)
CoagOutletPlatformCut := CylinderF(CoagTank_Origin + [
    -R_CoagTank - S_ChemTankBorder/2;
    -R_CoagTank - S_ChemTankBorder/2;
    -T_ChemTankWall - T_PlantWall - zc
], outerradius(3 in), T_PlantWall + 2*zc, [0; 90]*deg)
ChlorineOutletPlatformCut := CylinderF(ChlorineTank_Origin + [
    -R_ChlorineTank - S_ChemTankBorder/2;
    -R_ChlorineTank - S_ChemTankBorder/2;
    -T_ChemTankWall - T_PlantWall - zc
], outerradius(3 in), T_PlantWall + 2*zc, [0; 90]*deg)
ChemPlatformHoleScript := stack(CoagDrainPlatformCut1, CoagDrainPlatformCut2, ChlorineDrainPlatformCut1, ChlorineDrainPlatformCut2, CoagOutletPlatformCut, ChlorineOutletPlatformCut)
RotateChemPieces := Rotate_All(CoagTank_Origin, -90 deg)
SlideChemPiecesY := MoveAll(CoagTank_Origin, CoagTank_Origin + [0 m; -2*R_CoagTank - 4*R_ChlorineTank - 3*S_ChemTankBorder; 0 m])
FreezeChemPieces := FreezeMultiple(["ChemCoagTank"; "ChemCoagPipePlu"; "ChemCoagFittingPlu"; "ChemChlorineTank"; "ChemChlorineFittingPlu"; "ChemChlorinePipePlu"])
ChemTankPositionScript :=
    stack(ChemPlatformHoleScript, ThawChemPieces, RotateChemPieces, SlideChemPiecesY, FreezeChemPieces, GroupDelete, SubtractFromOpChemPlatform) if L_ChemTanksTotal > W_ChemPlatform
    stack(ChemPlatformHoleScript, GroupDelete, SubtractFromOpChemPlatform) otherwise
ChemTanksReflectRotateScript := stack(ChemReflectScript, ChemTankPositionScript)
# Draw the plumbing that connects the all the pieces and leads to the constant head tanks
L_Coag2CoagPipe := 0.5*(W_EtChemPlatform - (2*R_CoagTank + 2*T_ChemTankWall + 2*S_ChemTankBorder) - sqrt(2)*(R_CoagTank + T_ChemTankWall + L_BulkheadFittingEnd + L_MaleInsertEnd + L_FirstPipe + L_BallValve + L_SecondPipe + ElbowRadius(ND_CoagPiping)) - TeeLength(ND_CoagPiping) - 2*ElbowRadius(ND_CoagPiping))
L_CoagYCorrection := ThirdCoagPipe_Origin[1] - 3*ElbowRadius(ND_CoagPiping) - L_Coag2CoagPipe - 0.5*TeeLength(ND_CoagPiping) - (ChemWallHole_Origin[1] + 0.5*L_PlatformHole)
L_CoagXCorrection := ChemWallHole_Origin[0] + T_PlantWall + zc - (ThirdCoagPipe_Origin[0] + ShortTeeLength(ND_CoagPiping) + 2*ElbowRadius(ND_CoagPiping) + L_FirstPipe)
L_ChlorfirstXCorrection := R_FilterCoagTank + zc
L_ChlorsecondXCorrection := R_ChlorineTank
L_ChlorfirstYCorrection := R_ChlorineTank
L_FCfirstXCorrection := R_FilterCoagTank + zc
L_ChlorsecondYCorrection := R_ChlorineTank + L_CoagYCorrection + 2*ElbowRadius(ND_CoagPiping) - 5*zc
L_ChlorthirdXCorrection := L_CoagXCorrection - 5*zc - 3*ElbowRadius(ND_CoagPiping)
L_FCYCorrection := L_CoagYCorrection + 5*zc
L_FCsecondXCorrection := 2*L_CoagXCorrection - 2*ElbowRadius(ND_CoagPiping)
LayerNewChemConnections := layer_new("ChemConnectionsPlu", green)
CoagElbow := ElbowF(ThirdCoagPipe_Origin - [0 m; 0 m; L_ThirdPipe1], [180; 270; 90]*deg, ND_CoagPiping, PS_Modules)
CoagElbow2 := ElbowF([
    CoagTank_Origin[0] - sqrt(2)/2*(R_CoagTank + T_ChemTankWall + L_BulkheadFittingEnd + L_FirstPipe + L_BallValve + L_SecondPipe + ElbowRadius(ND_CoagPiping));
    CoagTank_Origin[1] - W_EtChemPlatform + 2*R_CoagTank + 2*T_ChemTankWall + 2*S_ChemTankBorder + sqrt(2)/2*(R_CoagTank + T_ChemTankWall + L_BulkheadFittingEnd + L_FirstPipe + L_BallValve + L_SecondPipe + ElbowRadius(ND_CoagPiping));
    ThirdCoagPipe_Origin[2] - L_ThirdPipe1
], [180; 90; 90]*deg, ND_CoagPiping, PS_Modules)
ChlorElbow := ElbowF([
    ChlorineTank_Origin[0] - 2*R_ChlorineTank - 2*T_ChemTankWall - S_ChemTankBorder;
    ThirdChlorPipe_Origin[1];
    ThirdChlorPipe_Origin[2] - L_ThirdPipe1
], [0; 270; 270]*deg, ND_CoagPiping, PS_Modules)
ChlorTee := TeeF([
    ChlorineTank_Origin[0] + ShortTeeLength(ND_CoagPiping);
    ChlorineTank_Origin[1] + .5*(2*(S_ChemTankBorder + R_ChlorineTank + T_ChemTankWall) - W_EtChemPlatform);
    ThirdChlorPipe_Origin[2] - L_ThirdPipe
], [90; 180; 0]*deg, ND_CoagPiping, PS_Modules)
CoagTee := TeeF([
    ThirdCoagPipe_Origin[0] + ShortTeeLength(ND_CoagPiping);
    ThirdCoagPipe_Origin[1] - ElbowRadius(ND_CoagPiping) - L_Coag2CoagPipe - 0.5*TeeLength(ND_CoagPiping);
    ThirdCoagPipe_Origin[2] - L_ThirdPipe
], [90; 180; 0]*deg, ND_CoagPiping, PS_Modules)
CoagElbow3 := ElbowF([
    ThirdCoagPipe_Origin[0] + ShortTeeLength(ND_CoagPiping) + L_FirstPipe + ElbowRadius(ND_CoagPiping);
    ThirdCoagPipe_Origin[1] - 2*ElbowRadius(ND_CoagPiping) - L_Coag2CoagPipe - 0.5*TeeLength(ND_CoagPiping);
    ThirdCoagPipe_Origin[2] - L_ThirdPipe
], [0; 0; 0]*deg, ND_CoagPiping, PS_Modules)
CoagElbow4 := ElbowF([
    ThirdCoagPipe_Origin[0] + ShortTeeLength(ND_CoagPiping) + L_FirstPipe + ElbowRadius(ND_CoagPiping);
    ThirdCoagPipe_Origin[1] - 2*ElbowRadius(ND_CoagPiping) - L_Coag2CoagPipe - 0.5*TeeLength(ND_CoagPiping) - L_CoagYCorrection;
    ThirdCoagPipe_Origin[2] - L_ThirdPipe
], [0; 180; 180]*deg, ND_CoagPiping, PS_Modules)
ChlorElbow2 := ElbowF([
    (ChlorineTank_Origin[0] + ShortTeeLength(ND_CoagPiping)) + L_ChlorfirstXCorrection + ElbowRadius(ND_CoagPiping);
    ChlorineTank_Origin[1] + .5*(2*(S_ChemTankBorder + R_ChlorineTank + T_ChemTankWall) - W_EtChemPlatform) + ElbowRadius(ND_CoagPiping);
    ThirdChlorPipe_Origin[2] - L_ThirdPipe
], [180; 180; 0]*deg, ND_CoagPiping, PS_Modules)
ChlorElbow3 := ElbowF([
    (ChlorineTank_Origin[0] + ShortTeeLength(ND_CoagPiping)) + L_ChlorfirstXCorrection + ElbowRadius(ND_CoagPiping);
    (ChlorineTank_Origin[1] + .5*(2*(S_ChemTankBorder + R_ChlorineTank + T_ChemTankWall) - W_EtChemPlatform) + ElbowRadius(ND_CoagPiping)) + L_ChlorfirstYCorrection;
    ThirdChlorPipe_Origin[2] - L_ThirdPipe
], [0; 180; 0]*deg, ND_CoagPiping, PS_Modules)
ChlorElbow4 := ElbowF([
    (ChlorineTank_Origin[0] + ShortTeeLength(ND_CoagPiping)) + L_ChlorfirstXCorrection + ElbowRadius(ND_CoagPiping) + ElbowRadius(ND_CoagPiping) + ElbowRadius(ND_CoagPiping) + L_ChlorsecondXCorrection;
    (ChlorineTank_Origin[1] + .5*(2*(S_ChemTankBorder + R_ChlorineTank + T_ChemTankWall) - W_EtChemPlatform) + ElbowRadius(ND_CoagPiping)) + L_ChlorfirstYCorrection;
    ThirdChlorPipe_Origin[2] - L_ThirdPipe
], [0; 0; 0]*deg, ND_CoagPiping, PS_Modules)
ChlorElbow5 := ElbowF([
    ((ChlorineTank_Origin[0] + ShortTeeLength(ND_CoagPiping)) + L_ChlorfirstXCorrection + ElbowRadius(ND_CoagPiping) + 2*ElbowRadius(ND_CoagPiping)) + L_ChlorsecondXCorrection;
    ((ChlorineTank_Origin[1] + .5*(2*(S_ChemTankBorder + R_ChlorineTank + T_ChemTankWall) - W_EtChemPlatform) + ElbowRadius(ND_CoagPiping)) + L_ChlorfirstYCorrection) - L_ChlorsecondYCorrection;
    ThirdChlorPipe_Origin[2] - L_ThirdPipe
], [0; 180; 180]*deg, ND_CoagPiping, PS_Modules)
Coag2CoagPipe1 := PipeF([
    ThirdCoagPipe_Origin[0];
    ThirdCoagPipe_Origin[1] - ElbowRadius(ND_CoagPiping);
    ThirdCoagPipe_Origin[2] - L_ThirdPipe
], L_Coag2CoagPipe, [90; 0]*deg, ND_CoagPiping, PS_Modules)
Coag2CoagPipe2 := PipeF([
    ThirdCoagPipe_Origin[0];
    ThirdCoagPipe_Origin[1] - ElbowRadius(ND_CoagPiping) - L_Coag2CoagPipe - TeeLength(ND_CoagPiping);
    ThirdCoagPipe_Origin[2] - L_ThirdPipe
], L_Coag2CoagPipe, [90; 0]*deg, ND_CoagPiping, PS_Modules)
CoagTeePipe := PipeF([
    ThirdCoagPipe_Origin[0] + ShortTeeLength(ND_CoagPiping);
    ThirdCoagPipe_Origin[1] - ElbowRadius(ND_CoagPiping) - L_Coag2CoagPipe - 0.5*TeeLength(ND_CoagPiping);
    ThirdCoagPipe_Origin[2] - L_ThirdPipe
], L_FirstPipe, [180; 0]*deg, ND_CoagPiping, PS_Modules)
CoagYPipe := PipeF([
    ThirdCoagPipe_Origin[0] + ShortTeeLength(ND_CoagPiping) + L_FirstPipe + ElbowRadius(ND_CoagPiping);
    ThirdCoagPipe_Origin[1] - 2*ElbowRadius(ND_CoagPiping) - L_Coag2CoagPipe - 0.5*TeeLength(ND_CoagPiping);
    ThirdCoagPipe_Origin[2] - L_ThirdPipe
], L_CoagYCorrection, [90; 0]*deg, ND_CoagPiping, PS_Modules)
CoagXPipe := PipeF([
    ThirdCoagPipe_Origin[0] + ShortTeeLength(ND_CoagPiping) + L_FirstPipe + 2*ElbowRadius(ND_CoagPiping);
    ThirdCoagPipe_Origin[1] - 3*ElbowRadius(ND_CoagPiping) - L_Coag2CoagPipe - 0.5*TeeLength(ND_CoagPiping) - L_CoagYCorrection;
    ThirdCoagPipe_Origin[2] - L_ThirdPipe
], L_CoagXCorrection, [180; 0]*deg, ND_CoagPiping, PS_Modules)
ChlorfirstXPipe := PipeF([
    ChlorineTank_Origin[0] + ShortTeeLength(ND_CoagPiping);
    ChlorineTank_Origin[1] + .5*(2*(S_ChemTankBorder + R_ChlorineTank + T_ChemTankWall) - W_EtChemPlatform);
    ThirdChlorPipe_Origin[2] - L_ThirdPipe
], L_ChlorfirstXCorrection, [180; 0]*deg, ND_CoagPiping, PS_Modules)
ChlorsecondXPipe := PipeF([
    (ChlorineTank_Origin[0] + ShortTeeLength(ND_CoagPiping)) + L_ChlorfirstXCorrection + ElbowRadius(ND_CoagPiping) + ElbowRadius(ND_CoagPiping);
    (ChlorineTank_Origin[1] + .5*(2*(S_ChemTankBorder + R_ChlorineTank + T_ChemTankWall) - W_EtChemPlatform) + ElbowRadius(ND_CoagPiping)) + L_ChlorfirstYCorrection + ElbowRadius(ND_CoagPiping);
    ThirdChlorPipe_Origin[2] - L_ThirdPipe
], L_ChlorsecondXCorrection, [180; 0]*deg, ND_CoagPiping, PS_Modules)
ChlorfirstYPipe := PipeF([
    (ChlorineTank_Origin[0] + ShortTeeLength(ND_CoagPiping)) + L_ChlorfirstXCorrection + ElbowRadius(ND_CoagPiping);
    ChlorineTank_Origin[1] + .5*(2*(S_ChemTankBorder + R_ChlorineTank + T_ChemTankWall) - W_EtChemPlatform) + ElbowRadius(ND_CoagPiping);
    ThirdChlorPipe_Origin[2] - L_ThirdPipe
], L_ChlorfirstYCorrection, [270; 0]*deg, ND_CoagPiping, PS_Modules)
ChlorsecondYPipe := PipeF([
    ((ChlorineTank_Origin[0] + ShortTeeLength(ND_CoagPiping)) + L_ChlorfirstXCorrection + ElbowRadius(ND_CoagPiping) + 2*ElbowRadius(ND_CoagPiping)) + L_ChlorsecondXCorrection;
    (ChlorineTank_Origin[1] + .5*(2*(S_ChemTankBorder + R_ChlorineTank + T_ChemTankWall) - W_EtChemPlatform) + ElbowRadius(ND_CoagPiping)) + L_ChlorfirstYCorrection;
    ThirdChlorPipe_Origin[2] - L_ThirdPipe
], L_ChlorsecondYCorrection, [90; 0]*deg, ND_CoagPiping, PS_Modules)
ChlorthirdXPipe := PipeF([
    ((ChlorineTank_Origin[0] + ShortTeeLength(ND_CoagPiping)) + L_ChlorfirstXCorrection + ElbowRadius(ND_CoagPiping) + 2*ElbowRadius(ND_CoagPiping)) + L_ChlorsecondXCorrection + ElbowRadius(ND_CoagPiping);
    ((ChlorineTank_Origin[1] + .5*(2*(S_ChemTankBorder + R_ChlorineTank + T_ChemTankWall) - W_EtChemPlatform) + ElbowRadius(ND_CoagPiping)) + L_ChlorfirstYCorrection) - L_ChlorsecondYCorrection - ElbowRadius(ND_CoagPiping);
    ThirdChlorPipe_Origin[2] - L_ThirdPipe
], L_ChlorthirdXCorrection, [180; 0]*deg, ND_CoagPiping, PS_Modules)
ChemPiping := stack(LayerNewChemConnections, CoagElbow, CoagElbow2, CoagTee, ChlorTee, CoagElbow3, CoagElbow4, ChlorElbow2, ChlorElbow3, ChlorElbow4, ChlorElbow5, LayerChemConnFrz, LayerNewChemPiping, Coag2CoagPipe1, Coag2CoagPipe2, CoagTeePipe, CoagYPipe, CoagXPipe, ChlorfirstXPipe, ChlorfirstYPipe, ChlorsecondXPipe, ChlorsecondYPipe, ChlorthirdXPipe, LayerChemPipFrz)
# Draw the drainage plumbing
L_CoagDrainXCorrection := R_CoagTank + T_ChemTankWall + S_ChemTankBorder - T_PlantWall - outerdiameter(ND_CoagPiping)
L_CoagDrainYCorrection := 0.5*W_EtChemPlatform - (R_CoagTank + T_ChemTankWall + S_ChemTankBorder) - L_PlatformDrainHole + 1.5*outerdiameter(ND_CoagPiping)
L_ChlorDrainXCorrection := 2*R_CoagTank + 3*T_ChemTankWall + R_ChlorineTank + 2*S_ChemTankBorder - T_PlantWall - outerdiameter(ND_CoagPiping)
L_ChlorDrainYCorrection := 0.5*W_EtChemPlatform - (R_ChlorineTank + T_ChemTankWall + S_ChemTankBorder) - L_PlatformDrainHole + 4.5*outerdiameter(ND_CoagPiping)
L_Chlor2DrainXCorrection := 2*R_CoagTank + 5*T_ChemTankWall + 3*R_ChlorineTank + 3*S_ChemTankBorder - T_PlantWall - outerdiameter(ND_CoagPiping)
L_Chlor2DrainYCorrection := 0.5*W_EtChemPlatform - (R_FilterCoagTank + T_ChemTankWall + S_ChemTankBorder) - L_PlatformDrainHole + 7.5*outerdiameter(ND_CoagPiping)
L_ZCorrection := Z_CoagulantTankBottom - Z_Walkway - L_DrainPipe - outerdiameter(ND_CoagPiping)
L_ConnPipe := T_PlantWall + outerdiameter(ND_CoagPiping) - ElbowRadius(ND_CoagPiping)
LayerNewChemDrainConnections := layer_new("ChemDrainConnectionsPlu", green)
CoagDrainElbow := ElbowF(CoagTank_Origin + [0 m; 0 m; -L_BulkheadFittingEnd - L_MaleInsertEnd - L_DrainPipe + ElbowRadius(ND_CoagPiping)], [90; 270; 0]*deg, ND_CoagPiping, PS_Modules)
CoagDrainElbow2 := ElbowF(CoagTank_Origin + [
    0 m;
    ElbowRadius(ND_CoagPiping) - L_CoagDrainYCorrection;
    -L_BulkheadFittingEnd - L_MaleInsertEnd - L_DrainPipe
], [180; 0; 0]*deg, ND_CoagPiping, PS_Modules)
CoagDrainElbow3 := ElbowF(CoagTank_Origin + [
    L_CoagDrainXCorrection - ElbowRadius(ND_CoagPiping);
    -L_CoagDrainYCorrection;
    -L_BulkheadFittingEnd - L_MaleInsertEnd - L_DrainPipe
], [-90; 0; -90]*deg, ND_CoagPiping, PS_Modules)
CoagDrainElbow4 := ElbowF(CoagTank_Origin + [
    L_CoagDrainXCorrection;
    -L_CoagDrainYCorrection;
    -L_BulkheadFittingEnd - L_MaleInsertEnd - L_DrainPipe - L_ZCorrection + ElbowRadius(ND_CoagPiping)
], [0; 180; 270]*deg, ND_CoagPiping, PS_Modules)
CoagDrainElbow5 := ElbowF(CoagTank_Origin + [
    L_CoagDrainXCorrection + L_BallValve + 2*SocketDepth(ND_CoagPiping) + L_ConnPipe;
    -L_CoagDrainYCorrection;
    -L_BulkheadFittingEnd - L_MaleInsertEnd - L_DrainPipe - L_ZCorrection
], [-90; 0; -90]*deg, ND_CoagPiping, PS_Modules)
ChlorDrainElbow := ElbowF(ChlorineTank_Origin + [0 m; 0 m; -L_BulkheadFittingEnd - L_MaleInsertEnd - L_DrainPipe + ElbowRadius(ND_CoagPiping)], [90; 270; 0]*deg, ND_CoagPiping, PS_Modules)
ChlorDrainElbow2 := ElbowF(ChlorineTank_Origin + [
    0 m;
    ElbowRadius(ND_CoagPiping) - L_ChlorDrainYCorrection;
    -L_BulkheadFittingEnd - L_MaleInsertEnd - L_DrainPipe
], [180; 0; 0]*deg, ND_CoagPiping, PS_Modules)
ChlorDrainElbow3 := ElbowF(ChlorineTank_Origin + [
    L_ChlorDrainXCorrection - ElbowRadius(ND_CoagPiping);
    -L_ChlorDrainYCorrection;
    -L_BulkheadFittingEnd - L_MaleInsertEnd - L_DrainPipe
], [-90; 0; -90]*deg, ND_CoagPiping, PS_Modules)
ChlorDrainElbow4 := ElbowF(ChlorineTank_Origin + [
    L_ChlorDrainXCorrection;
    -L_ChlorDrainYCorrection;
    -L_BulkheadFittingEnd - L_MaleInsertEnd - L_DrainPipe - L_ZCorrection + ElbowRadius(ND_CoagPiping)
], [0; 180; 270]*deg, ND_CoagPiping, PS_Modules)
ChlorDrainElbow5 := ElbowF(ChlorineTank_Origin + [
    L_ChlorDrainXCorrection + L_BallValve + 2*SocketDepth(ND_CoagPiping) + L_ConnPipe;
    -L_ChlorDrainYCorrection;
    -L_BulkheadFittingEnd - L_MaleInsertEnd - L_DrainPipe - L_ZCorrection
], [-90; 0; -90]*deg, ND_CoagPiping, PS_Modules)
Chlor2DrainElbow := ElbowF(ChlorineTank_Origin + [
    -2*R_ChlorineTank - S_ChemTankBorder - 2*T_ChemTankWall;
    0 m;
    -L_BulkheadFittingEnd - L_MaleInsertEnd - L_DrainPipe + ElbowRadius(ND_CoagPiping)
], [90; 270; 0]*deg, ND_CoagPiping, PS_Modules)
Chlor2DrainElbow2 := ElbowF(ChlorineTank_Origin + [
    -2*R_ChlorineTank - S_ChemTankBorder - 2*T_ChemTankWall;
    ElbowRadius(ND_CoagPiping) - L_Chlor2DrainYCorrection;
    -L_BulkheadFittingEnd - L_MaleInsertEnd - L_DrainPipe
], [180; 0; 0]*deg, ND_CoagPiping, PS_Modules)
Chlor2DrainElbow3 := ElbowF(ChlorineTank_Origin + [
    -2*R_ChlorineTank - S_ChemTankBorder - 2*T_ChemTankWall + L_Chlor2DrainXCorrection - ElbowRadius(ND_CoagPiping);
    -L_Chlor2DrainYCorrection;
    -L_BulkheadFittingEnd - L_MaleInsertEnd - L_DrainPipe
], [-90; 0; -90]*deg, ND_CoagPiping, PS_Modules)
Chlor2DrainElbow4 := ElbowF(ChlorineTank_Origin + [
    -2*R_ChlorineTank - S_ChemTankBorder - 2*T_ChemTankWall + L_Chlor2DrainXCorrection;
    -L_Chlor2DrainYCorrection;
    -L_BulkheadFittingEnd - L_MaleInsertEnd - L_DrainPipe - L_ZCorrection + ElbowRadius(ND_CoagPiping)
], [0; 180; 270]*deg, ND_CoagPiping, PS_Modules)
Chlor2DrainElbow5 := ElbowF(ChlorineTank_Origin + [
    -2*R_ChlorineTank - S_ChemTankBorder - 2*T_ChemTankWall + L_Chlor2DrainXCorrection + L_BallValve + 2*SocketDepth(ND_CoagPiping) + L_ConnPipe;
    -L_Chlor2DrainYCorrection;
    -L_BulkheadFittingEnd - L_MaleInsertEnd - L_DrainPipe - L_ZCorrection
], [-90; 0; -90]*deg, ND_CoagPiping, PS_Modules)
CoagDrainBallValve := insertdwg("https://confluence.cornell.edu/download/attachments/173604905/BallValve.dwg", CoagTank_Origin + [
    L_CoagDrainXCorrection + L_ConnPipe - SocketDepth(ND_CoagPiping);
    -L_CoagDrainYCorrection;
    -L_BulkheadFittingEnd - L_MaleInsertEnd - L_DrainPipe - L_ZCorrection
], 1/250, 1/250, -90 deg)
RotateCoagBallValve := Rotate3DLast(CoagTank_Origin + [
    L_CoagDrainXCorrection + L_ConnPipe - SocketDepth(ND_CoagPiping);
    -L_CoagDrainYCorrection;
    -L_BulkheadFittingEnd - L_MaleInsertEnd - L_DrainPipe - L_ZCorrection
], "Y", 90 deg)
ChlorDrainBallValve := insertdwg("https://confluence.cornell.edu/download/attachments/173604905/BallValve.dwg", ChlorineTank_Origin + [
    L_ChlorDrainXCorrection + L_ConnPipe - SocketDepth(ND_CoagPiping);
    -L_ChlorDrainYCorrection;
    -L_BulkheadFittingEnd - L_MaleInsertEnd - L_DrainPipe - L_ZCorrection
], 1/250, 1/250, -90 deg)
RotateChlorBallValve := Rotate3DLast(ChlorineTank_Origin + [
    L_ChlorDrainXCorrection + L_ConnPipe - SocketDepth(ND_CoagPiping);
    -L_ChlorDrainYCorrection;
    -L_BulkheadFittingEnd - L_MaleInsertEnd - L_DrainPipe - L_ZCorrection
], "Y", 90 deg)
Chlor2DrainBallValve := insertdwg("https://confluence.cornell.edu/download/attachments/173604905/BallValve.dwg", ChlorineTank_Origin + [
    -2*R_ChlorineTank - S_ChemTankBorder - 2*T_ChemTankWall + L_Chlor2DrainXCorrection + L_ConnPipe - SocketDepth(ND_CoagPiping);
    -L_Chlor2DrainYCorrection;
    -L_BulkheadFittingEnd - L_MaleInsertEnd - L_DrainPipe - L_ZCorrection
], 1/250, 1/250, -90 deg)
RotateChlor2BallValve := Rotate3DLast(ChlorineTank_Origin + [
    -2*R_ChlorineTank - S_ChemTankBorder - 2*T_ChemTankWall + L_Chlor2DrainXCorrection + L_ConnPipe - SocketDepth(ND_CoagPiping);
    -L_Chlor2DrainYCorrection;
    -L_BulkheadFittingEnd - L_MaleInsertEnd - L_DrainPipe - L_ZCorrection
], "Y", 90 deg)
CoagYDrainPipe := PipeF(CoagTank_Origin + [0 m; -ElbowRadius(ND_CoagPiping); -L_BulkheadFittingEnd - L_MaleInsertEnd - L_DrainPipe], L_CoagDrainYCorrection - 2*ElbowRadius(ND_CoagPiping), [90; 0]*deg, ND_CoagPiping, PS_Modules)
CoagXDrainPipe := PipeF(CoagTank_Origin + [
    ElbowRadius(ND_CoagPiping);
    -L_CoagDrainYCorrection;
    -L_BulkheadFittingEnd - L_MaleInsertEnd - L_DrainPipe
], L_CoagDrainXCorrection - 2*ElbowRadius(ND_CoagPiping), [180; 0]*deg, ND_CoagPiping, PS_Modules)
CoagZDrainPipe := PipeF(CoagTank_Origin + [
    L_CoagDrainXCorrection;
    -L_CoagDrainYCorrection;
    -L_BulkheadFittingEnd - L_MaleInsertEnd - L_DrainPipe - ElbowRadius(ND_CoagPiping)
], L_ZCorrection - 2*ElbowRadius(ND_CoagPiping), [0; 270]*deg, ND_CoagPiping, PS_Modules)
ChlorYDrainPipe := PipeF(ChlorineTank_Origin + [0 m; -ElbowRadius(ND_CoagPiping); -L_BulkheadFittingEnd - L_MaleInsertEnd - L_DrainPipe], L_ChlorDrainYCorrection - 2*ElbowRadius(ND_CoagPiping), [90; 0]*deg, ND_CoagPiping, PS_Modules)
ChlorXDrainPipe := PipeF(ChlorineTank_Origin + [
    ElbowRadius(ND_CoagPiping);
    -L_ChlorDrainYCorrection;
    -L_BulkheadFittingEnd - L_MaleInsertEnd - L_DrainPipe
], L_ChlorDrainXCorrection - 2*ElbowRadius(ND_CoagPiping), [180; 0]*deg, ND_CoagPiping, PS_Modules)
ChlorZDrainPipe := PipeF(ChlorineTank_Origin + [
    L_ChlorDrainXCorrection;
    -L_ChlorDrainYCorrection;
    -L_BulkheadFittingEnd - L_MaleInsertEnd - L_DrainPipe - ElbowRadius(ND_CoagPiping)
], L_ZCorrection - 2*ElbowRadius(ND_CoagPiping), [0; 270]*deg, ND_CoagPiping, PS_Modules)
Chlor2YDrainPipe := PipeF(ChlorineTank_Origin + [
    -2*R_ChlorineTank - S_ChemTankBorder - 2*T_ChemTankWall;
    -ElbowRadius(ND_CoagPiping);
    -L_BulkheadFittingEnd - L_MaleInsertEnd - L_DrainPipe
], L_Chlor2DrainYCorrection - 2*ElbowRadius(ND_CoagPiping), [90; 0]*deg, ND_CoagPiping, PS_Modules)
Chlor2XDrainPipe := PipeF(ChlorineTank_Origin + [
    -2*R_ChlorineTank - S_ChemTankBorder - 2*T_ChemTankWall + ElbowRadius(ND_CoagPiping);
    -L_Chlor2DrainYCorrection;
    -L_BulkheadFittingEnd - L_MaleInsertEnd - L_DrainPipe
], L_Chlor2DrainXCorrection - 2*ElbowRadius(ND_CoagPiping), [180; 0]*deg, ND_CoagPiping, PS_Modules)
Chlor2ZDrainPipe := PipeF(ChlorineTank_Origin + [
    -2*R_ChlorineTank - S_ChemTankBorder - 2*T_ChemTankWall + L_Chlor2DrainXCorrection;
    -L_Chlor2DrainYCorrection;
    -L_BulkheadFittingEnd - L_MaleInsertEnd - L_DrainPipe - ElbowRadius(ND_CoagPiping)
], L_ZCorrection - 2*ElbowRadius(ND_CoagPiping), [0; 270]*deg, ND_CoagPiping, PS_Modules)
CoagConnPipe := PipeF(CoagTank_Origin + [
    L_CoagDrainXCorrection + ElbowRadius(ND_CoagPiping);
    -L_CoagDrainYCorrection;
    -L_BulkheadFittingEnd - L_MaleInsertEnd - L_DrainPipe - L_ZCorrection
], L_ConnPipe - ElbowRadius(ND_CoagPiping), [180; 0]*deg, ND_CoagPiping, PS_Modules)
ChlorConnPipe := PipeF(ChlorineTank_Origin + [
    L_ChlorDrainXCorrection + ElbowRadius(ND_CoagPiping);
    -L_ChlorDrainYCorrection;
    -L_BulkheadFittingEnd - L_MaleInsertEnd - L_DrainPipe - L_ZCorrection
], L_ConnPipe - ElbowRadius(ND_CoagPiping), [180; 0]*deg, ND_CoagPiping, PS_Modules)
Chlor2ConnPipe := PipeF(ChlorineTank_Origin + [
    -2*R_ChlorineTank - S_ChemTankBorder - 2*T_ChemTankWall + L_Chlor2DrainXCorrection + ElbowRadius(ND_CoagPiping);
    -L_Chlor2DrainYCorrection;
    -L_BulkheadFittingEnd - L_MaleInsertEnd - L_DrainPipe - L_ZCorrection
], L_ConnPipe - ElbowRadius(ND_CoagPiping), [180; 0]*deg, ND_CoagPiping, PS_Modules)
CoagConnPipe2 := PipeF(CoagTank_Origin + [
    L_CoagDrainXCorrection + L_BallValve + L_ConnPipe;
    -L_CoagDrainYCorrection;
    -L_BulkheadFittingEnd - L_MaleInsertEnd - L_DrainPipe - L_ZCorrection
], 2*SocketDepth(ND_CoagPiping), [180; 0]*deg, ND_CoagPiping, PS_Modules)
ChlorConnPipe2 := PipeF(ChlorineTank_Origin + [
    L_ChlorDrainXCorrection + L_BallValve + L_ConnPipe;
    -L_ChlorDrainYCorrection;
    -L_BulkheadFittingEnd - L_MaleInsertEnd - L_DrainPipe - L_ZCorrection
], 2*SocketDepth(ND_CoagPiping), [180; 0]*deg, ND_CoagPiping, PS_Modules)
Chlor2ConnPipe2 := PipeF(ChlorineTank_Origin + [
    -2*R_ChlorineTank - S_ChemTankBorder - 2*T_ChemTankWall + L_Chlor2DrainXCorrection + L_BallValve + L_ConnPipe;
    -L_Chlor2DrainYCorrection;
    -L_BulkheadFittingEnd - L_MaleInsertEnd - L_DrainPipe - L_ZCorrection
], 2*SocketDepth(ND_CoagPiping), [180; 0]*deg, ND_CoagPiping, PS_Modules)
ThawDrainPieces := ThawMultiple(["ChemDrainConnectionsPlu"; "ChemDrainPipingPlu"])
MirrorDrainPieces := MirrorAll([
    CoagTank_Origin[0] - (R_CoagTank + T_ChemTankWall) + zc;
    CoagTank_Origin[1] + R_CoagTank + T_ChemTankWall + S_ChemTankBorder - 0.5*W_EtChemPlatform
], [
    CoagTank_Origin[0] - (R_CoagTank + T_ChemTankWall) - zc;
    CoagTank_Origin[1] + R_CoagTank + T_ChemTankWall + S_ChemTankBorder - 0.5*W_EtChemPlatform
], "n")
FreezeDrainPieces := FreezeMultiple(["ChemDrainConnectionsPlu"; "ChemDrainPipingPlu"])
ChemDrainPiping := stack(LayerNewChemDrainConnections, CoagDrainElbow, CoagDrainElbow2, CoagDrainElbow3, CoagDrainElbow4, CoagDrainElbow5, ChlorDrainElbow, ChlorDrainElbow2, ChlorDrainElbow3, ChlorDrainElbow4, ChlorDrainElbow5, Chlor2DrainElbow, Chlor2DrainElbow2, Chlor2DrainElbow3, Chlor2DrainElbow4, Chlor2DrainElbow5, CoagDrainBallValve, RotateCoagBallValve, ChlorDrainBallValve, RotateChlorBallValve, Chlor2DrainBallValve, RotateChlor2BallValve, LayerChemConnFrz, LayerNewChemDrainPiping, CoagYDrainPipe, CoagXDrainPipe, CoagZDrainPipe, ChlorYDrainPipe, ChlorXDrainPipe, ChlorZDrainPipe, Chlor2YDrainPipe, Chlor2XDrainPipe, Chlor2ZDrainPipe, CoagConnPipe, ChlorConnPipe, Chlor2ConnPipe, CoagConnPipe2, ChlorConnPipe2, Chlor2ConnPipe2, LayerChemDrainPipingFrz, ThawDrainPieces, MirrorDrainPieces, FreezeDrainPieces)
ChemDrainPipingNoFC := stack(LayerNewChemDrainConnections, CoagDrainElbow, CoagDrainElbow2, CoagDrainElbow3, CoagDrainElbow4, CoagDrainElbow5, ChlorDrainElbow, ChlorDrainElbow2, ChlorDrainElbow3, ChlorDrainElbow4, ChlorDrainElbow5, CoagDrainBallValve, RotateCoagBallValve, ChlorDrainBallValve, RotateChlorBallValve, LayerChemConnFrz, LayerNewChemDrainPiping, CoagYDrainPipe, CoagXDrainPipe, CoagZDrainPipe, ChlorYDrainPipe, ChlorXDrainPipe, ChlorZDrainPipe, CoagConnPipe, ChlorConnPipe, CoagConnPipe2, ChlorConnPipe2, LayerChemDrainPipingFrz, ThawDrainPieces, MirrorDrainPieces, FreezeDrainPieces)
AC_ChemTanks := stack(ChemMasonryScript, ChemTankScript, ChemCoagPlumbingScript, ChemChlorPlumbingScript, ChemTanksReflectRotateScript)
