Q_Plant := 20*L/s
# [reference: ExpertInputs.xmcd]
# [reference: MathFunctions.xmcd]
# [reference: PipeDatabase.xmcd]
# [reference: MaterialsDatabase.xmcd]
# [reference: FluidsFunctions.xmcd]
# [reference: SedTankFunctions.xmcd]
# [reference: CdcFunctions.xmcd]
# [reference: LfomFunctions.xmcd]
# [reference: SedimentationTank.xmcd]
# [reference: Flocculator.xmcd]
# [reference: LFOM.xmcd]
# [reference: EntranceTank.xmcd]
# [reference: StackedRapidSandFilter.xmcd]
# [reference: LinearCdc.xmcd]
# [reference: ChemStorageTanks.xmcd]
# AutoCAD drawing programs:
# Translators:
# These are the codes that take MathCAD outputs and create AutoCAD scripts that are used to draw the plant (formerly Basics)
# [reference: MtoATranslators.xmcd]
# The wrapped MtoA translator contains the functions that the user will want to access. These functions will draw pieces with full functionality - specifying the location, dimension, and orientation of the object. Also, it contains layer control and subtraction capabilities for grouped objects.
# [reference: MtoATranslatorsWrapped.xmcd]
# Drawing functions:
# [reference: ChannelF.xmcd]
# [reference: PlumbingF.xmcd]
# [reference: TankF.xmcd]
# [reference: StairsF.xmcd]
# [reference: DrainChannelF.xmcd]
# AutoCAD Script Files:
# [reference: FlocculatorAC.xmcd]
# [reference: SedimentationTankAC.xmcd]
# [reference: EntranceTankAC.xmcd]
# Chemical Stock Tank AutoCAD
outerdiameter := □  # error: This placeholder is empty.
# Length Assignments
ND_CoagPiping := 1/2*in
R_TankOutlet := .75 in
L_FirstPipe := 0.05 m
L_SecondPipe := 0.05 m
L_ThirdPipe := B_StockOutlet + T_PlantWall + T_ChemTankWall + outerdiameter(ND_CoagPiping) - ElbowRadius(ND_CoagPiping)
L_ThirdPipe1 := L_ThirdPipe - ElbowRadius(ND_CoagPiping)
L_ThirdPipe2 := L_ThirdPipe - ShortTeeLength(ND_CoagPiping)
L_BulkheadFittingEnd := 0.35*3/250*in
L_BallValve := 450/250*in
L_MaleInsertEnd := 3/4*3/250*in
L_DrainPipe := T_PlantWall + T_ChemTankWall + 3*outerdiameter(ND_CoagPiping) - L_BulkheadFittingEnd - L_MaleInsertEnd
# Origin Points
L_ChemTankShift := W_PlantDC
CoagTank_Origin :=
    if EN_DoubleTrain == 1
        [
            Et_Origin[0] - L_Et - T_PlantWall - S_ChemTankBorder - R_CoagTank - T_ChemTankWall - L_ChemTankShift - (T_ChannelWall + T_ConcreteMin);
            Et_Origin[1] - T_PlantWall + W_EtChemPlatform - R_CoagTank - S_ChemTankBorder;
            Z_CoagulantTankBottom
        ]
    otherwise
        [
            Et_Origin[0] - L_Et - T_PlantWall - S_ChemTankBorder - R_CoagTank - T_ChemTankWall - L_ChemTankShift;
            Et_Origin[1] + W_Et + T_PlantWall - S_ChemTankBorder - R_CoagTank - T_ChemTankWall;
            Z_CoagulantTankBottom
        ]
    = [-9.37187; 6.78357; 2.87591] m
ChlorineTank_Origin :=
    if EN_DoubleTrain == 0
        [
            CoagTank_Origin[0] - R_CoagTank - S_ChemTankBorder - R_ChlorineTank - 2*T_ChemTankWall;
            Et_Origin[1] + W_Et + T_PlantWall - T_ChemTankWall - R_ChlorineTank - S_ChemTankBorder;
            CoagTank_Origin[2]
        ]
    otherwise
        [
            CoagTank_Origin[0] - R_CoagTank - 2*T_ChemTankWall - R_ChlorineTank - S_ChemTankBorder;
            Et_Origin[1] - T_PlantWall + W_EtChemPlatform - R_ChlorineTank - S_ChemTankBorder;
            CoagTank_Origin[2]
        ]
FilterCoagTank_Origin :=
    if EN_DoubleTrain == 0
        [
            CoagTank_Origin[0] - R_CoagTank - 2*T_ChemTankWall - R_ChlorineTank - S_ChemTankBorder - 2*(R_ChlorineTank + T_ChemTankWall + 0.5*S_ChemTankBorder);
            Et_Origin[1] + W_Et + T_PlantWall - S_ChemTankBorder - R_FilterCoagTank - T_ChemTankWall;
            CoagTank_Origin[2]
        ]
    otherwise
        [
            CoagTank_Origin[0] - R_CoagTank - 2*T_ChemTankWall - R_ChlorineTank - S_ChemTankBorder - 2*(R_ChlorineTank + T_ChemTankWall + 0.5*S_ChemTankBorder);
            CoagTank_Origin[1];
            CoagTank_Origin[2]
        ]
# Plumbing origin points
ChlorOutlet_Origin := [
    ChlorineTank_Origin[0];
    ChlorineTank_Origin[1] - R_ChlorineTank - T_ChemTankWall;
    Z_CoagulantOutlet
]
FilterCoagOutlet_Origin := [
    FilterCoagTank_Origin[0];
    FilterCoagTank_Origin[1] - R_FilterCoagTank - T_ChemTankWall;
    Z_CoagulantOutlet
]
CoagOutlet_Origin := [
    CoagTank_Origin[0] - sqrt(2)/2*(R_CoagTank + T_ChemTankWall);
    CoagTank_Origin[1] - sqrt(2)/2*(R_CoagTank + T_ChemTankWall);
    Z_CoagulantOutlet
]
ChlorMaleInsert_Origin := [ChlorineTank_Origin[0]; ChlorOutlet_Origin[1] - L_BulkheadFittingEnd; ChlorOutlet_Origin[2]]
FilterCoagMaleInsert_Origin := [
    FilterCoagOutlet_Origin[0];
    FilterCoagOutlet_Origin[1] - L_BulkheadFittingEnd;
    FilterCoagOutlet_Origin[2]
]
CoagMaleInsert_Origin := [
    CoagOutlet_Origin[0] - sqrt(2)/2*L_BulkheadFittingEnd;
    CoagOutlet_Origin[1] - sqrt(2)/2*L_BulkheadFittingEnd;
    CoagOutlet_Origin[2]
]
FirstFilterCoagPipe_Origin := [
    FilterCoagMaleInsert_Origin[0];
    FilterCoagMaleInsert_Origin[1] - L_MaleInsertEnd;
    FilterCoagMaleInsert_Origin[2]
]
FirstChlorPipe_Origin := [ChlorMaleInsert_Origin[0]; ChlorMaleInsert_Origin[1] - L_MaleInsertEnd; ChlorMaleInsert_Origin[2]]
FirstCoagPipe_Origin := [
    CoagMaleInsert_Origin[0] - sqrt(2)/2*L_MaleInsertEnd;
    CoagMaleInsert_Origin[1] - sqrt(2)/2*L_MaleInsertEnd;
    CoagMaleInsert_Origin[2]
]
ChlorBallValve_Origin := [FirstChlorPipe_Origin[0]; FirstChlorPipe_Origin[1] - L_FirstPipe; FirstChlorPipe_Origin[2]]
FilterCoagBallValve_Origin := [
    FirstFilterCoagPipe_Origin[0];
    FirstFilterCoagPipe_Origin[1] - L_FirstPipe;
    FirstFilterCoagPipe_Origin[2]
]
CoagBallValve_Origin := [
    FirstCoagPipe_Origin[0] - sqrt(2)/2*L_FirstPipe;
    FirstCoagPipe_Origin[1] - sqrt(2)/2*L_FirstPipe;
    FirstCoagPipe_Origin[2]
]
SecondChlorPipe_Origin := [ChlorBallValve_Origin[0]; ChlorBallValve_Origin[1] - L_BallValve; ChlorBallValve_Origin[2]]
SecondFilterCoagPipe_Origin := [
    FilterCoagBallValve_Origin[0];
    FilterCoagBallValve_Origin[1] - L_BallValve;
    FilterCoagBallValve_Origin[2]
]
SecondCoagPipe_Origin := [
    CoagBallValve_Origin[0] - sqrt(2)/2*L_BallValve;
    CoagBallValve_Origin[1] - sqrt(2)/2*L_BallValve;
    CoagBallValve_Origin[2]
]
FirstChlorElbow_Origin := [SecondChlorPipe_Origin[0]; SecondChlorPipe_Origin[1] - L_SecondPipe; SecondChlorPipe_Origin[2]]
FirstFilterCoagElbow_Origin := [
    SecondFilterCoagPipe_Origin[0];
    SecondFilterCoagPipe_Origin[1] - L_SecondPipe;
    SecondFilterCoagPipe_Origin[2]
]
FirstCoagElbow_Origin := [
    SecondCoagPipe_Origin[0] - sqrt(2)/2*L_SecondPipe;
    SecondCoagPipe_Origin[1] - sqrt(2)/2*L_SecondPipe;
    SecondCoagPipe_Origin[2]
]
ThirdFCPipe_Origin := [
    FirstFilterCoagElbow_Origin[0];
    FirstFilterCoagElbow_Origin[1] - ElbowRadius(ND_CoagPiping);
    FirstFilterCoagElbow_Origin[2] - ElbowRadius(ND_CoagPiping)
]
ThirdCoagPipe_Origin := [
    FirstCoagElbow_Origin[0] - sqrt(2)/2*ElbowRadius(ND_CoagPiping);
    FirstCoagElbow_Origin[1] - sqrt(2)/2*ElbowRadius(ND_CoagPiping);
    FirstCoagElbow_Origin[2] - ElbowRadius(ND_CoagPiping)
]
ThirdChlorPipe_Origin := [
    FirstChlorElbow_Origin[0];
    FirstChlorElbow_Origin[1] - ElbowRadius(ND_CoagPiping);
    FirstChlorElbow_Origin[2] - ElbowRadius(ND_CoagPiping)
]
# Chemical Platform
ChemPlatform_Origin :=
    if EN_DoubleTrain == 0
        [
            CoagTank_Origin[0] + R_CoagTank + T_ChemTankWall + S_ChemTankBorder - L_EtChemPlatform;
            Et_Origin[1] + W_Et + T_PlantWall - W_EtChemPlatform;
            CoagTank_Origin[2] - T_ChemTankWall - T_PlantWall
        ]
    otherwise
        [
            CoagTank_Origin[0] + R_CoagTank + T_ChemTankWall + S_ChemTankBorder - L_EtChemPlatform;
            Et_Origin[1] - T_PlantWall;
            CoagTank_Origin[2] - T_ChemTankWall - T_PlantWall
        ]  # Width and length of the chemical platform are defined in ChemStorageTanks
W_ChemStairs := 1 m
W_ChemWalkway := 1 m
ChemPlatform_Dimensions := [L_EtChemPlatform; W_EtChemPlatform + W_ChemWalkway; T_PlantWall]
ChemPlatformWall_Origin := [
    ChemPlatform_Origin[0] + L_EtChemPlatform - T_PlantWall;
    ChemPlatform_Origin[1];
    Plant_Origin[2] + H_Sed - H_WalkwayToTankWall - T_PlantWall
]
ChemWalkway_Origin := [
    ChemPlatform_Origin[0];
    ChemPlatform_Origin[1] - W_ChemWalkway;
    ChemPlatform_Origin[2] + ChemPlatform_Dimensions[2]
]
ChemPlatformWall_Dimensions := [
    T_PlantWall;
    ChemPlatform_Dimensions[1];
    (CoagTank_Origin[2] - T_ChemTankWall - H_Sed + H_WalkwayToTankWall - T_PlantWall)*3/2
]
ChemWalkway_Dimensions := [W_ChemWalkway; ChemPlatformWall_Dimensions[1] + W_ChemStairs; T_PlantWall]
ChemPlatformWall2_Dimensions := [T_PlantWall; ChemPlatform_Dimensions[0] + W_ChemStairs; ChemPlatformWall_Dimensions[2]]
ChemPlatformWall2_Origin := [
    (ChemPlatform_Origin[0] + L_EtChemPlatform);
    ChemPlatform_Origin[1] + ChemPlatformWall_Dimensions[1];
    ChemPlatformWall_Origin[2]
]
ChemPlatformWall3_Dimensions := [
    T_PlantWall;
    ChemPlatform_Dimensions[1] + W_ChemStairs + T_PlantWall;
    ChemPlatformWall_Dimensions[2]
]
ChemPlatformWall3_Origin := [
    ChemPlatform_Origin[0] - T_PlantWall - W_ChemStairs;
    ChemPlatform_Origin[1] - W_ChemStairs;
    ChemPlatformWall_Origin[2]
]
ChemPlatformWall4_Dimensions := [
    T_PlantWall;
    ChemPlatform_Dimensions[0] + W_ChemStairs + T_PlantWall;
    ChemPlatformWall_Dimensions[2]
]
ChemPlatformWall4_Origin := [
    ChemPlatformWall_Origin[0] + T_PlantWall;
    ChemPlatform_Origin[1] - W_ChemStairs - T_PlantWall;
    ChemPlatformWall_Origin[2]
]
H_ChemStairs := CoagTank_Origin[2] - T_ChemTankWall - H_Sed + H_WalkwayToTankWall
L_ChemStairs := L_Stairs(W_ChemStairs, H_ChemStairs)
ChemStairs_Origin := ChemPlatform_Origin
L_PlatformDrainHole := 9*outerdiameter(ND_CoagPiping)
W_PlatformHole := 4*outerdiameter(ND_CoagPiping)
L_PlatformHole := 6*outerdiameter(ND_CoagPiping)
L_MaleInsertToHoleCenter := ElbowRadius(ND_CoagPiping) + L_BallValve + L_FirstPipe + L_SecondPipe
# This is the hole in the platform wall through which the pipes travel to reach the constant head tank. This is used again in OperatorAccessAC to subtract the hole from the wall.
ChemWallHole_Origin :=
    if EN_DoubleTrain == 0
        [
            CoagTank_Origin[0] + R_CoagTank + T_ChemTankWall + S_ChemTankBorder - T_PlantWall;
            Et_Origin[1] + W_Et + T_PlantWall - W_EtChemPlatform + 2*L_PlatformHole;
            CoagTank_Origin[2] - T_ChemTankWall - T_PlantWall - W_PlatformHole
        ]
    otherwise
        [
            CoagTank_Origin[0] + R_CoagTank + T_ChemTankWall + S_ChemTankBorder - T_PlantWall;
            ChemPlatform_Origin[1] + 2*L_PlatformHole;
            CoagTank_Origin[2] - T_ChemTankWall - T_PlantWall - W_PlatformHole
        ]
R_Hole := outerdiameter(AvailND[index2(ND_CoagPiping, AvailND)])/2
ChemPlatformLayer := layer_new("ChemPlatformCon", grey)
PlatformStairs := Stairs(ChemStairs_Origin, W_ChemStairs, H_ChemStairs, 0 deg)
PlatformBox := BoxF(ChemPlatform_Origin, ChemPlatform_Origin + ChemPlatform_Dimensions, [0; 0; 0]*deg)
PlatformWall := BoxF(ChemPlatformWall_Origin, ChemPlatformWall_Origin + ChemPlatformWall_Dimensions, [0; 0; 0]*deg)
ChemWalkway := BoxF(ChemWalkway_Origin, ChemWalkway_Origin + ChemWalkway_Dimensions, [0; 180; 0]*deg)
PlatformWall2 := BoxF(ChemPlatformWall2_Origin, ChemPlatformWall2_Origin + ChemPlatformWall2_Dimensions, [90; 0; 0]*deg)
PlatformWall3 := BoxF(ChemPlatformWall3_Origin, ChemPlatformWall3_Origin + ChemPlatformWall3_Dimensions, [0; 0; 0]*deg)
PlatformWall4 := BoxF(ChemPlatformWall4_Origin, ChemPlatformWall4_Origin + ChemPlatformWall4_Dimensions, [90; 0; 0]*deg)
UnionPlatform1 := Union_All
FreezeEtWalkway := FreezeLayer("ChemPlatformCon")
SubtractDrainWallBox := BoxF([
    ChemPlatformWall_Origin[0];
    ChemPlatform_Origin[1] + 0.5*W_EtChemPlatform - L_PlatformDrainHole;
    ChemPlatformWall_Origin[2]
], [
    ChemPlatformWall_Origin[0] + T_PlantWall;
    ChemPlatform_Origin[1] + 0.5*W_EtChemPlatform + L_PlatformDrainHole;
    ChemPlatformWall_Origin[2] + W_PlatformHole
], [0; 0; 0]*deg)
SubtractDoseWallBox := BoxF(ChemWallHole_Origin, [
    ChemPlatformWall_Origin[0] + T_PlantWall;
    ChemPlatformWall_Origin[1] + 3*L_PlatformHole;
    ChemPlatform_Origin[2]
], [0; 0; 0]*deg)
GroupPlatformSubtractions := GroupAll("DeleteMe")
SubtractPlatformHoles := SubtractF(["ChemPlatformCon"], "DeleteMe")
SubtractionScript := stack(FreezeEtWalkway, SubtractDrainWallBox, SubtractDoseWallBox, GroupPlatformSubtractions, SubtractPlatformHoles)
# If the number of flocculator channels is even,
# the platform will be mirrored. However, this shouldn't happen now.
Mirror := Mirror3dAll("YZ", [Plant_Origin[0] - 1/2*L_Sed; 0 m; 0 m], "Y")
ChemPlatform := stack(ChemPlatformLayer, PlatformStairs, PlatformBox, PlatformWall, PlatformWall2, PlatformWall3, PlatformWall4, ChemWalkway, UnionPlatform1, SubtractionScript)
LayerNewCoagTanks := layer_new("CoagTanks", grey)
CoagOuterTankWall := CylinderF(CoagTank_Origin - [0 m; 0 m; T_ChemTankWall], R_CoagTank + T_ChemTankWall, H_CoagTank + T_ChemTankWall, [0; 90]*deg)
FreezeCoagTanks := FreezeLayer("CoagTanks")
CoagInnerTankWall := CylinderF(CoagTank_Origin, R_CoagTank, H_CoagTank + zc, [0; 90]*deg)
CoagSubtractionCylinder := CylinderF(CoagOutlet_Origin + [sqrt(2)/2*T_ChemTankWall; sqrt(2)/2*T_ChemTankWall; 0 m], R_TankOutlet, 3*T_ChemTankWall, [45; 0]*deg)
CoagDrainSubtractionCylinder := CylinderF(CoagTank_Origin, R_TankOutlet, 2*T_ChemTankWall, [0; 270]*deg)
GroupCoagTank := GroupAll("DeleteMe")
SubtractCoagInner := SubtractF(["CoagTanks"], "DeleteMe")
DrawCoagTanks := stack(LayerNewCoagTanks, view("t"), CoagOuterTankWall, FreezeCoagTanks, CoagInnerTankWall, CoagSubtractionCylinder, CoagDrainSubtractionCylinder, GroupCoagTank, SubtractCoagInner)
# Draw the first coagulant tank
# Draw the coagulant tank plumbing
LayerCoagPieces := layer_new("CoagConnectionsPlu", green)
CoagBulkheadFitting := insertdwg("https://confluence.cornell.edu/download/attachments/173604905/BulkheadFittingScaled.dwg", CoagOutlet_Origin, 3/250, 3/250, 315 deg)
CoagMaleInsert := insertdwg("https://confluence.cornell.edu/download/attachments/173604905/MaleInsert.dwg", CoagMaleInsert_Origin, 3/250, 3/250, 315 deg)
CoagBallValve := insertdwg("https://confluence.cornell.edu/download/attachments/173604905/BallValve.dwg", CoagBallValve_Origin, 1/250, 1/250, 0 deg)
RotateBallValve := Rotate3DLast(CoagBallValve_Origin, "X", 270 deg)
RotateBallValve2 := Rotate3DLast(CoagBallValve_Origin, "Z", 135 deg)
CoagDrainBulkheadFitting := insertdwg("https://confluence.cornell.edu/download/attachments/173604905/BulkheadFittingScaled.dwg", CoagTank_Origin, 3/250, 3/250, 0 deg)
RotateBulkheadFitting := Rotate3DLast(CoagTank_Origin, "X", 90 deg)
.1624
2.18/5.2987 = 0.411422
CoagDrainMaleInsert := insertdwg("https://confluence.cornell.edu/download/attachments/173604905/MaleInsert.dwg", CoagTank_Origin + [0 m; 0 m; -L_BulkheadFittingEnd], 3/250, 3/250, 0 deg)
RotateMaleInsert := Rotate3DLast(CoagTank_Origin + [0 m; 0 m; -L_BulkheadFittingEnd], "X", 90 deg)
LayerCoagPiecesFrz := FreezeLayer("CoagConnectionsPlu")
LayerCoagPiping := layer_new("CoagPipingPlu", blue)
FirstCoagTankPipe := PipeF(FirstCoagPipe_Origin, L_FirstPipe, [45; 0]*deg, ND_CoagPiping, PS_Modules)
SecondCoagPipe := PipeF(SecondCoagPipe_Origin, L_SecondPipe, [45; 0]*deg, ND_CoagPiping, PS_Modules)
FirstCoagTankElbow := ElbowF(FirstCoagElbow_Origin, [0; 90; 180]*deg, ND_CoagPiping, PS_Modules)
RotateElbow := Rotate3DLast(FirstCoagElbow_Origin, "Z", 315 deg)
LayerCoagPipingFrz := FreezeLayer("CoagPipingPlu")
CoagPlu := stack(LayerCoagPieces, CoagBulkheadFitting, CoagMaleInsert, CoagBallValve, RotateBallValve, RotateBallValve2, CoagDrainBulkheadFitting, RotateBulkheadFitting, CoagDrainMaleInsert, RotateMaleInsert, LayerCoagPiecesFrz, LayerCoagPiping, FirstCoagTankPipe, SecondCoagPipe, FirstCoagTankElbow, RotateElbow, LayerCoagPipingFrz)
ThawCoagPieces := ThawMultiple(["CoagTanks"; "CoagConnectionsPlu"; "CoagPipingPlu"])
MirrorCoagTank := MirrorAll([
    CoagTank_Origin[0] - (R_CoagTank + T_ChemTankWall) + zc;
    CoagTank_Origin[1] + R_CoagTank + T_ChemTankWall + S_ChemTankBorder - 0.5*W_EtChemPlatform
], [
    CoagTank_Origin[0] - (R_CoagTank + T_ChemTankWall) - zc;
    CoagTank_Origin[1] + R_CoagTank + T_ChemTankWall + S_ChemTankBorder - 0.5*W_EtChemPlatform
], "n")
LayerFreezeCoagPieces := FreezeMultiple(["CoagTanks"; "CoagConnectionsPlu"; "CoagPipingPlu"])
CoagTankReflect := stack(ThawCoagPieces, MirrorCoagTank, LayerFreezeCoagPieces)
# Reflect the first coagulant tank and associated plumbing
# Not reflected coagulant plumbing
ThirdCoagPipe := PipeSUBF(ThirdCoagPipe_Origin, L_ThirdPipe1, [0; 270]*deg, ND_CoagPiping, PS_Modules, ["ChemPlatformCon"])
FirstCoagDrainPipe := PipeSUBF(CoagTank_Origin + [0 m; 0 m; -L_BulkheadFittingEnd - L_MaleInsertEnd], L_DrainPipe - ElbowRadius(ND_CoagPiping), [0; 270]*deg, ND_CoagPiping, PS_Modules, ["ChemPlatformCon"])
ThirdCoagPipe2 := PipeSUBF(CoagTank_Origin + [
    0 m;
    2*R_CoagTank + 2*T_ChemTankWall + 2*S_ChemTankBorder - W_EtChemPlatform;
    -CoagTank_Origin[2] + ThirdCoagPipe_Origin[2]
] + [
    -sqrt(2)/2*(R_CoagTank + T_ChemTankWall + L_BulkheadFittingEnd + L_MaleInsertEnd + L_MaleInsertToHoleCenter);
    sqrt(2)/2*(R_CoagTank + T_ChemTankWall + L_BulkheadFittingEnd + L_MaleInsertEnd + L_MaleInsertToHoleCenter);
    0 m
], L_ThirdPipe1, [0; 270]*deg, ND_CoagPiping, PS_Modules, ["ChemPlatformCon"])
FirstCoagDrainPipe2 := PipeSUBF(CoagTank_Origin + [
    0 m;
    2*R_CoagTank + 2*T_ChemTankWall + 2*S_ChemTankBorder - W_EtChemPlatform;
    -L_BulkheadFittingEnd - L_MaleInsertEnd
], L_DrainPipe - ElbowRadius(ND_CoagPiping), [0; 270]*deg, ND_CoagPiping, PS_Modules, ["ChemPlatformCon"])
CoagNoReflect := stack(SelectLayer("CoagPipingPlu"), ThirdCoagPipe, FirstCoagDrainPipe, ThirdCoagPipe2, FirstCoagDrainPipe2, LayerCoagPipingFrz)
LayerNewChlorineTanks := layer_new("ChlorTanks", grey)
ChlorOuterTankWall := CylinderF(ChlorineTank_Origin - [0 m; 0 m; T_ChemTankWall], R_ChlorineTank + T_ChemTankWall, H_ChlorineTank + T_ChemTankWall, [0; 90]*deg)
LayerFreezeChlorineTanks := FreezeLayer("ChlorTanks")
ChlorInnerTankWall := CylinderF(ChlorineTank_Origin, R_ChlorineTank, H_ChlorineTank + zc, [0; 90]*deg)
ChlorSubtractionCylinder := CylinderF(ChlorOutlet_Origin + [0 m; T_ChemTankWall; 0 m], R_TankOutlet, 3*T_ChemTankWall, [90; 0]*deg)
ChlorDrainSubtractionCylinder := CylinderF(ChlorineTank_Origin, R_TankOutlet, T_ChemTankWall, [0; 270]*deg)
GroupChlorTank := GroupAll("DeleteMe")
SubtractChlorInner := SubtractF(["ChlorTanks"], "DeleteMe")
DrawChlorTanks := stack(LayerNewChlorineTanks, view("t"), ChlorOuterTankWall, LayerFreezeChlorineTanks, ChlorInnerTankWall, SubtractChlorInner, ChlorSubtractionCylinder, ChlorDrainSubtractionCylinder, GroupChlorTank, SubtractChlorInner)
# Draw the first chlorine tank
LayerChlorPieces := layer_new("ChlorConnectionsPlu", green)
ChlorBulkheadFitting := insertdwg("https://confluence.cornell.edu/download/attachments/173604905/BulkheadFittingScaled.dwg", ChlorOutlet_Origin, 3/250, 3/250, 0 deg)
ChlorMaleInsert := insertdwg("https://confluence.cornell.edu/download/attachments/173604905/MaleInsert.dwg", ChlorMaleInsert_Origin, 3/250, 3/250, 0 deg)
ChlorBallValve := insertdwg("https://confluence.cornell.edu/download/attachments/173604905/BallValve.dwg", ChlorBallValve_Origin, 1/250, 1/250, 0 deg)
RotateBallValve := Rotate3DLast(ChlorBallValve_Origin, "X", 270 deg)
RotateBallValve2 := Rotate3DLast(ChlorBallValve_Origin, "Z", 180 deg)
ChlorDrainBulkheadFitting := insertdwg("https://confluence.cornell.edu/download/attachments/173604905/BulkheadFittingScaled.dwg", ChlorineTank_Origin, 3/250, 3/250, 0 deg)
RotateBulkheadFitting := Rotate3DLast(ChlorineTank_Origin, "X", 90 deg)
ChlorDrainMaleInsert := insertdwg("https://confluence.cornell.edu/download/attachments/173604905/MaleInsert.dwg", ChlorineTank_Origin + [0 m; 0 m; -L_BulkheadFittingEnd], 3/250, 3/250, 0 deg)
RotateMaleInsert := Rotate3DLast(ChlorineTank_Origin + [0 m; 0 m; -L_BulkheadFittingEnd], "X", 90 deg)
LayerChlorPiecesFrz := FreezeLayer("ChlorConnectionsPlu")
LayerChlorPiping := layer_new("ChlorPipingPlu", blue)
FirstChlorPipe := PipeF(FirstChlorPipe_Origin, L_FirstPipe, [90; 0]*deg, ND_CoagPiping, PS_Modules)
SecondChlorPipe := PipeF(SecondChlorPipe_Origin, L_SecondPipe, [90; 0]*deg, ND_CoagPiping, PS_Modules)
FirstChlorElbow := ElbowF(FirstChlorElbow_Origin, [0; 90; 180]*deg, ND_CoagPiping, PS_Modules)
SecondChlorElbow := ElbowF([ChlorineTank_Origin[0]; ThirdFCPipe_Origin[1]; ThirdFCPipe_Origin[2] - L_ThirdPipe1], [0; 270; 270]*deg, ND_CoagPiping, PS_Modules)
L_Chlor2ChlorPipe := -(.5*(2*(S_ChemTankBorder + R_FilterCoagTank + T_ChemTankWall) - W_EtChemPlatform) + T_ChemTankWall + .5*TeeLength(ND_CoagPiping) + 2*ElbowRadius(ND_CoagPiping) + L_SecondPipe + L_BallValve + L_FirstPipe + L_BulkheadFittingEnd + L_MaleInsertEnd + R_ChlorineTank)
Chlor2ChlorPipe := PipeF([
    ChlorineTank_Origin[0];
    ThirdChlorPipe_Origin[1] - ElbowRadius(ND_CoagPiping) - L_Chlor2ChlorPipe;
    ThirdChlorPipe_Origin[2] - L_ThirdPipe
], L_Chlor2ChlorPipe, [270; 0]*deg, ND_CoagPiping, PS_Modules)
LayerChlorPipingFrz := FreezeLayer("ChlorPipingPlu")
ChlorPlu := stack(LayerChlorPieces, ChlorBulkheadFitting, ChlorMaleInsert, ChlorBallValve, RotateBallValve, RotateBallValve2, ChlorDrainBulkheadFitting, RotateBulkheadFitting, ChlorDrainMaleInsert, RotateMaleInsert, FirstChlorElbow, SecondChlorElbow, LayerChlorPiecesFrz, LayerChlorPiping, FirstChlorPipe, SecondChlorPipe, Chlor2ChlorPipe, LayerChlorPipingFrz)
# Draw the chlorine tank plumbing
# Reflect the first chlorine tank and associated plumbing
ThawChlorPieces := ThawMultiple(["ChlorTanks"; "ChlorConnectionsPlu"; "ChlorPipingPlu"])
MirrorChlorTank :=
    if EN_DoubleTrain == 0
        MirrorAll([
            ChlorineTank_Origin[0] - zc;
            ChlorineTank_Origin[1] + .5*(2*(S_ChemTankBorder + R_FilterCoagTank + T_ChemTankWall) - W_EtChemPlatform)
        ], [
            ChlorineTank_Origin[0] + zc;
            ChlorineTank_Origin[1] + .5*(2*(S_ChemTankBorder + R_FilterCoagTank + T_ChemTankWall) - W_EtChemPlatform)
        ], "n")
    MirrorAll([ChlorineTank_Origin[0] - zc; CoagTank_Origin[1] - R_CoagTank - .5*S_ChemTankBorder], [ChlorineTank_Origin[0] + zc; CoagTank_Origin[1] - R_CoagTank - .5*S_ChemTankBorder], "n") otherwise
LayerFreezeChlorPieces := FreezeMultiple(["ChlorTanks"; "ChlorConnectionsPlu"; "ChlorPipingPlu"])
ChlorTankReflect := stack(ThawChlorPieces, MirrorChlorTank, LayerFreezeChlorPieces)
FirstChlorDrainPipe := PipeSUBF(ChlorineTank_Origin + [0 m; 0 m; -L_BulkheadFittingEnd - L_MaleInsertEnd], L_DrainPipe - ElbowRadius(ND_CoagPiping), [0; 270]*deg, ND_CoagPiping, PS_Modules, ["ChemPlatformCon"])
VertChlorPipe := PipeSUBF(ThirdChlorPipe_Origin, L_ThirdPipe1, [0; 270]*deg, ND_CoagPiping, PS_Modules, ["ChemPlatformCon"])
FirstChlorDrainPipe2 := PipeSUBF(ChlorineTank_Origin + [
    0 m;
    2*R_ChlorineTank + 2*T_ChemTankWall + 2*S_ChemTankBorder - W_EtChemPlatform;
    -L_BulkheadFittingEnd - L_MaleInsertEnd
], L_DrainPipe - ElbowRadius(ND_CoagPiping), [0; 270]*deg, ND_CoagPiping, PS_Modules, ["ChemPlatformCon"])
VertChlorPipe2 := PipeSUBF(ChlorineTank_Origin + [
    0 m;
    (R_ChlorineTank + T_ChemTankWall + L_BulkheadFittingEnd + L_MaleInsertEnd + L_MaleInsertToHoleCenter) + (2*(S_ChemTankBorder + R_ChlorineTank + T_ChemTankWall) - W_EtChemPlatform);
    -ChlorineTank_Origin[2] + ThirdChlorPipe_Origin[2]
], L_ThirdPipe1, [0; 270]*deg, ND_CoagPiping, PS_Modules, ["ChemPlatformCon"])
ChlorNoReflect := stack(SelectLayer("ChlorPipingPlu"), FirstChlorDrainPipe, VertChlorPipe, FirstChlorDrainPipe2, VertChlorPipe2, LayerChlorPipingFrz)
# Not reflected chlorine plumbing
# Draw the first filter coagulant tank
LayerNewFilterCoagTanks := layer_new("FCoagTanks", grey)
FilterCoagOuterTankWall := CylinderF(FilterCoagTank_Origin - [0 m; 0 m; T_ChemTankWall], R_FilterCoagTank + T_ChemTankWall, H_FilterCoagTank + T_ChemTankWall, [0; 90]*deg)
LayerFreezeFilterCoagTanks := FreezeLayer("FCoagTanks")
FilterCoagInnerTankWall := CylinderF(FilterCoagTank_Origin, R_FilterCoagTank, H_FilterCoagTank + zc, [0; 90]*deg)
FilterCoagSubtractionCylinder := CylinderF(FilterCoagOutlet_Origin + [0 m; -T_ChemTankWall; 0 m], R_TankOutlet, 3*T_ChemTankWall, [270; 0]*deg)
FilterCoagDrainSubtractionCylinder := CylinderF(FilterCoagTank_Origin, R_TankOutlet, T_ChemTankWall, [0; 270]*deg)
GroupFilterCoagTank := GroupAll("DeleteMe")
SubtractFilterCoagInner := SubtractF(["FCoagTanks"], "DeleteMe")
DrawFilterCoagTanks := stack(LayerNewFilterCoagTanks, view("t"), FilterCoagOuterTankWall, LayerFreezeFilterCoagTanks, FilterCoagInnerTankWall, FilterCoagSubtractionCylinder, FilterCoagDrainSubtractionCylinder, GroupFilterCoagTank, SubtractFilterCoagInner)
# Draw the filter coagulant tank plumbing
LayerFilterCoagPieces := layer_new("FCoagConnectionsPlu", green)
FCoagBulkheadFitting := insertdwg("https://confluence.cornell.edu/download/attachments/173604905/BulkheadFittingScaled.dwg", FilterCoagOutlet_Origin, 3/250, 3/250, 0 deg)
FCoagMaleInsert := insertdwg("https://confluence.cornell.edu/download/attachments/173604905/MaleInsert.dwg", FilterCoagMaleInsert_Origin, 3/250, 3/250, 0 deg)
FCoagBallValve := insertdwg("https://confluence.cornell.edu/download/attachments/173604905/BallValve.dwg", FilterCoagBallValve_Origin, 1/250, 1/250, 0 deg)
RotateBallValve := Rotate3DLast(FilterCoagBallValve_Origin, "X", 270 deg)
RotateBallValve2 := Rotate3DLast(FilterCoagBallValve_Origin, "Z", 180 deg)
FCoagDrainBulkheadFitting := insertdwg("https://confluence.cornell.edu/download/attachments/173604905/BulkheadFittingScaled.dwg", FilterCoagTank_Origin, 3/250, 3/250, 0 deg)
RotateBulkheadFitting := Rotate3DLast(FilterCoagTank_Origin, "X", 90 deg)
FCoagDrainMaleInsert := insertdwg("https://confluence.cornell.edu/download/attachments/173604905/MaleInsert.dwg", FilterCoagTank_Origin + [0 m; 0 m; -L_BulkheadFittingEnd], 3/250, 3/250, 0 deg)
RotateMaleInsert := Rotate3DLast(FilterCoagTank_Origin + [0 m; 0 m; -L_BulkheadFittingEnd], "X", 90 deg)
FirstFCoagElbow := ElbowF(FirstFilterCoagElbow_Origin, [0; 90; 180]*deg, ND_CoagPiping, PS_Modules)
SecondFCoagElbow := ElbowF([
    ChlorineTank_Origin[0] - 2*R_ChlorineTank - 2*T_ChemTankWall - S_ChemTankBorder;
    ThirdChlorPipe_Origin[1];
    ThirdChlorPipe_Origin[2] - L_ThirdPipe1
], [0; 270; 270]*deg, ND_CoagPiping, PS_Modules)
LayerFCoagPiecesFrz := FreezeLayer("FCoagConnectionsPlu")
LayerFCoagPiping := layer_new("FCoagPipingPlu", blue)
FirstFCoagPipe := PipeF(FirstFilterCoagPipe_Origin, L_FirstPipe, [90; 0]*deg, ND_CoagPiping, PS_Modules)
SecondFCoagPipe := PipeF(SecondFilterCoagPipe_Origin, L_SecondPipe, [90; 0]*deg, ND_CoagPiping, PS_Modules)
FirstFCoagDrainPipe := PipeSUBF(FilterCoagTank_Origin + [0 m; 0 m; -L_BulkheadFittingEnd - L_MaleInsertEnd], L_DrainPipe - ElbowRadius(ND_CoagPiping), [0; 270]*deg, ND_CoagPiping, PS_Modules, ["ChemPlatformCon"])
VertFCoagPipe := PipeSUBF(ThirdFCPipe_Origin, L_ThirdPipe1, [0; 270]*deg, ND_CoagPiping, PS_Modules, ["ChemPlatformCon"])
L_FC2FCPipe := -(.5*(2*(S_ChemTankBorder + R_FilterCoagTank + T_ChemTankWall) - W_EtChemPlatform) + T_ChemTankWall + R_FilterCoagTank + L_FirstPipe + L_BallValve + L_SecondPipe + L_BulkheadFittingEnd + L_MaleInsertEnd + .5*TeeLength(ND_CoagPiping) + 2*ElbowRadius(ND_CoagPiping)) = 0.128145 m
FC2FCPipe := PipeF([
    FilterCoagTank_Origin[0];
    ThirdFCPipe_Origin[1] - ElbowRadius(ND_CoagPiping) - L_FC2FCPipe;
    ThirdFCPipe_Origin[2] - L_ThirdPipe
], L_FC2FCPipe, [270; 0]*deg, ND_CoagPiping, PS_Modules)
LayerFCoagPipingFrz := FreezeLayer("FCoagPipingPlu")
SubtractFC2DrainPipe := CylinderSUBF(FilterCoagTank_Origin + [
    0 m;
    2*R_FilterCoagTank + 2*T_ChemTankWall + 2*S_ChemTankBorder - W_EtChemPlatform;
    -T_ChemTankWall
], R_Hole, T_PlantWall, [0; 270]*deg, ["ChemPlatformCon"])
SubtractFC2DosePipe := CylinderSUBF(FilterCoagTank_Origin + [
    0 m;
    (R_FilterCoagTank + T_ChemTankWall + L_BulkheadFittingEnd + L_MaleInsertEnd + L_MaleInsertToHoleCenter) + (2*(S_ChemTankBorder + R_FilterCoagTank + T_ChemTankWall) - W_EtChemPlatform);
    -T_ChemTankWall
], R_Hole, T_PlantWall, [0; 270]*deg, ["ChemPlatformCon"])
FilterCoagPlu := stack(LayerFilterCoagPieces, FCoagBulkheadFitting, FCoagMaleInsert, FCoagBallValve, RotateBallValve, RotateBallValve2, FCoagDrainBulkheadFitting, RotateBulkheadFitting, FCoagDrainMaleInsert, RotateMaleInsert, FirstFCoagElbow, SecondFCoagElbow, LayerFCoagPiecesFrz, LayerFCoagPiping, FirstFCoagPipe, SecondFCoagPipe, FirstFCoagDrainPipe, VertFCoagPipe, FC2FCPipe, LayerFCoagPipingFrz, SubtractFC2DrainPipe, SubtractFC2DosePipe)
# Reflect the first filter coagulant tank and associated plumbing
ThawFilterCoagPieces := ThawMultiple(["FCoagTanks"; "FCoagConnectionsPlu"; "FCoagPipingPlu"])
MirrorFilterCoagTank := MirrorAll([
    FilterCoagTank_Origin[0] - zc;
    FilterCoagTank_Origin[1] + .5*(2*(S_ChemTankBorder + R_FilterCoagTank + T_ChemTankWall) - W_EtChemPlatform)
], [
    FilterCoagTank_Origin[0] + zc;
    FilterCoagTank_Origin[1] + .5*(2*(S_ChemTankBorder + R_FilterCoagTank + T_ChemTankWall) - W_EtChemPlatform)
], "n")
LayerFreezeFilterCoagPieces := FreezeMultiple(["FCoagTanks"; "FCoagConnectionsPlu"; "FCoagPipingPlu"])
FilterCoagTankReflect := stack(ThawFilterCoagPieces, MirrorFilterCoagTank, LayerFreezeFilterCoagPieces)
# Draw the plumbing that connects the all the pieces and leads to the constant head tanks
L_Coag2CoagPipe := 0.5*(W_EtChemPlatform - (2*R_CoagTank + 2*T_ChemTankWall + 2*S_ChemTankBorder) - sqrt(2)*(R_CoagTank + T_ChemTankWall + L_BulkheadFittingEnd + L_MaleInsertEnd + L_FirstPipe + L_BallValve + L_SecondPipe + ElbowRadius(ND_CoagPiping)) - TeeLength(ND_CoagPiping) - 2*ElbowRadius(ND_CoagPiping))
L_CoagYCorrection := ThirdCoagPipe_Origin[1] - 3*ElbowRadius(ND_CoagPiping) - L_Coag2CoagPipe - 0.5*TeeLength(ND_CoagPiping) - (ChemWallHole_Origin[1] + 0.5*L_PlatformHole)
L_CoagXCorrection := ChemWallHole_Origin[0] + T_PlantWall + zc - (ThirdCoagPipe_Origin[0] + ShortTeeLength(ND_CoagPiping) + 2*ElbowRadius(ND_CoagPiping) + L_FirstPipe)
L_ChlorfirstXCorrection := R_FilterCoagTank + zc
L_ChlorsecondXCorrection := R_ChlorineTank
L_ChlorfirstYCorrection := R_ChlorineTank
L_FCfirstXCorrection := R_FilterCoagTank + zc
L_ChlorsecondYCorrection := R_ChlorineTank + L_CoagYCorrection + 2*ElbowRadius(ND_CoagPiping) - 5*zc
L_ChlorthirdXCorrection := L_CoagXCorrection - 5*zc - 3*ElbowRadius(ND_CoagPiping)
L_FCYCorrection := L_CoagYCorrection + 5*zc
L_FCsecondXCorrection := 2*L_CoagXCorrection - 2*ElbowRadius(ND_CoagPiping)
LayerNewChemConnections := layer_new("ChemConnectionsPlu", green)
CoagElbow := ElbowF(ThirdCoagPipe_Origin - [0 m; 0 m; L_ThirdPipe1], [180; 270; 90]*deg, ND_CoagPiping, PS_Modules)
CoagElbow2 := ElbowF([
    CoagTank_Origin[0] - sqrt(2)/2*(R_CoagTank + T_ChemTankWall + L_BulkheadFittingEnd + L_FirstPipe + L_BallValve + L_SecondPipe + ElbowRadius(ND_CoagPiping));
    CoagTank_Origin[1] - W_EtChemPlatform + 2*R_CoagTank + 2*T_ChemTankWall + 2*S_ChemTankBorder + sqrt(2)/2*(R_CoagTank + T_ChemTankWall + L_BulkheadFittingEnd + L_FirstPipe + L_BallValve + L_SecondPipe + ElbowRadius(ND_CoagPiping));
    ThirdCoagPipe_Origin[2] - L_ThirdPipe1
], [180; 90; 90]*deg, ND_CoagPiping, PS_Modules)
ChlorElbow := ElbowF([
    ChlorineTank_Origin[0] - 2*R_ChlorineTank - 2*T_ChemTankWall - S_ChemTankBorder;
    ThirdChlorPipe_Origin[1];
    ThirdChlorPipe_Origin[2] - L_ThirdPipe1
], [0; 270; 270]*deg, ND_CoagPiping, PS_Modules)
FCoagElbow := ElbowF([
    FilterCoagTank_Origin[0] - 2*R_FilterCoagTank - 2*T_ChemTankWall - S_ChemTankBorder;
    ThirdFCPipe_Origin[1];
    ThirdFCPipe_Origin[2] - L_ThirdPipe1
], [0; 90; 270]*deg, ND_CoagPiping, PS_Modules)
ChlorTee := TeeF([
    ChlorineTank_Origin[0] + ShortTeeLength(ND_CoagPiping);
    ChlorineTank_Origin[1] + .5*(2*(S_ChemTankBorder + R_ChlorineTank + T_ChemTankWall) - W_EtChemPlatform);
    ThirdChlorPipe_Origin[2] - L_ThirdPipe
], [90; 180; 0]*deg, ND_CoagPiping, PS_Modules)
FCTee := TeeF([
    FilterCoagTank_Origin[0] + ShortTeeLength(ND_CoagPiping);
    FilterCoagTank_Origin[1] + .5*(2*(S_ChemTankBorder + R_FilterCoagTank + T_ChemTankWall) - W_EtChemPlatform);
    ThirdFCPipe_Origin[2] - L_ThirdPipe
], [90; 180; 0]*deg, ND_CoagPiping, PS_Modules)
CoagTee := TeeF([
    ThirdCoagPipe_Origin[0] + ShortTeeLength(ND_CoagPiping);
    ThirdCoagPipe_Origin[1] - ElbowRadius(ND_CoagPiping) - L_Coag2CoagPipe - 0.5*TeeLength(ND_CoagPiping);
    ThirdCoagPipe_Origin[2] - L_ThirdPipe
], [90; 180; 0]*deg, ND_CoagPiping, PS_Modules)
CoagElbow3 := ElbowF([
    ThirdCoagPipe_Origin[0] + ShortTeeLength(ND_CoagPiping) + L_FirstPipe + ElbowRadius(ND_CoagPiping);
    ThirdCoagPipe_Origin[1] - 2*ElbowRadius(ND_CoagPiping) - L_Coag2CoagPipe - 0.5*TeeLength(ND_CoagPiping);
    ThirdCoagPipe_Origin[2] - L_ThirdPipe
], [0; 0; 0]*deg, ND_CoagPiping, PS_Modules)
CoagElbow4 := ElbowF([
    ThirdCoagPipe_Origin[0] + ShortTeeLength(ND_CoagPiping) + L_FirstPipe + ElbowRadius(ND_CoagPiping);
    ThirdCoagPipe_Origin[1] - 2*ElbowRadius(ND_CoagPiping) - L_Coag2CoagPipe - 0.5*TeeLength(ND_CoagPiping) - L_CoagYCorrection;
    ThirdCoagPipe_Origin[2] - L_ThirdPipe
], [0; 180; 180]*deg, ND_CoagPiping, PS_Modules)
ChlorElbow2 := ElbowF([
    (ChlorineTank_Origin[0] + ShortTeeLength(ND_CoagPiping)) + L_ChlorfirstXCorrection + ElbowRadius(ND_CoagPiping);
    ChlorineTank_Origin[1] + .5*(2*(S_ChemTankBorder + R_ChlorineTank + T_ChemTankWall) - W_EtChemPlatform) + ElbowRadius(ND_CoagPiping);
    ThirdChlorPipe_Origin[2] - L_ThirdPipe
], [180; 180; 0]*deg, ND_CoagPiping, PS_Modules)
ChlorElbow3 := ElbowF([
    (ChlorineTank_Origin[0] + ShortTeeLength(ND_CoagPiping)) + L_ChlorfirstXCorrection + ElbowRadius(ND_CoagPiping);
    (ChlorineTank_Origin[1] + .5*(2*(S_ChemTankBorder + R_ChlorineTank + T_ChemTankWall) - W_EtChemPlatform) + ElbowRadius(ND_CoagPiping)) + L_ChlorfirstYCorrection;
    ThirdChlorPipe_Origin[2] - L_ThirdPipe
], [0; 180; 0]*deg, ND_CoagPiping, PS_Modules)
ChlorElbow4 := ElbowF([
    (ChlorineTank_Origin[0] + ShortTeeLength(ND_CoagPiping)) + L_ChlorfirstXCorrection + ElbowRadius(ND_CoagPiping) + ElbowRadius(ND_CoagPiping) + ElbowRadius(ND_CoagPiping) + L_ChlorsecondXCorrection;
    (ChlorineTank_Origin[1] + .5*(2*(S_ChemTankBorder + R_ChlorineTank + T_ChemTankWall) - W_EtChemPlatform) + ElbowRadius(ND_CoagPiping)) + L_ChlorfirstYCorrection;
    ThirdChlorPipe_Origin[2] - L_ThirdPipe
], [0; 0; 0]*deg, ND_CoagPiping, PS_Modules)
ChlorElbow5 := ElbowF([
    ((ChlorineTank_Origin[0] + ShortTeeLength(ND_CoagPiping)) + L_ChlorfirstXCorrection + ElbowRadius(ND_CoagPiping) + 2*ElbowRadius(ND_CoagPiping)) + L_ChlorsecondXCorrection;
    ((ChlorineTank_Origin[1] + .5*(2*(S_ChemTankBorder + R_ChlorineTank + T_ChemTankWall) - W_EtChemPlatform) + ElbowRadius(ND_CoagPiping)) + L_ChlorfirstYCorrection) - L_ChlorsecondYCorrection;
    ThirdChlorPipe_Origin[2] - L_ThirdPipe
], [0; 180; 180]*deg, ND_CoagPiping, PS_Modules)
FCElbow2 := ElbowF([
    FilterCoagTank_Origin[0] + ShortTeeLength(ND_CoagPiping) + L_FCfirstXCorrection + ElbowRadius(ND_CoagPiping);
    (FilterCoagTank_Origin[1] - (R_FilterCoagTank + (L_FirstPipe + L_BallValve + L_SecondPipe)) - 2*ElbowRadius(ND_CoagPiping)) - L_FC2FCPipe - .5*TeeLength(ND_CoagPiping) - ElbowRadius(ND_CoagPiping) - T_ChemTankWall;
    ThirdFCPipe_Origin[2] - L_ThirdPipe
], [0; 0; 0]*deg, ND_CoagPiping, PS_Modules)
FCElbow3 := ElbowF([
    FilterCoagTank_Origin[0] + ShortTeeLength(ND_CoagPiping) + L_FCfirstXCorrection + ElbowRadius(ND_CoagPiping);
    ((FilterCoagTank_Origin[1] - (R_FilterCoagTank + (L_FirstPipe + L_BallValve + L_SecondPipe)) - 2*ElbowRadius(ND_CoagPiping)) - L_FC2FCPipe - .5*TeeLength(ND_CoagPiping) - ElbowRadius(ND_CoagPiping)) - L_FCYCorrection - T_ChemTankWall;
    ThirdFCPipe_Origin[2] - L_ThirdPipe
], [0; 180; 180]*deg, ND_CoagPiping, PS_Modules)
LayerChemConnFrz := FreezeLayer("ChemConnectionsPlu")
LayerNewChemPiping := layer_new("ChemPipingPlu", blue)
Coag2CoagPipe1 := PipeF([
    ThirdCoagPipe_Origin[0];
    ThirdCoagPipe_Origin[1] - ElbowRadius(ND_CoagPiping);
    ThirdCoagPipe_Origin[2] - L_ThirdPipe
], L_Coag2CoagPipe, [90; 0]*deg, ND_CoagPiping, PS_Modules)
Coag2CoagPipe2 := PipeF([
    ThirdCoagPipe_Origin[0];
    ThirdCoagPipe_Origin[1] - ElbowRadius(ND_CoagPiping) - L_Coag2CoagPipe - TeeLength(ND_CoagPiping);
    ThirdCoagPipe_Origin[2] - L_ThirdPipe
], L_Coag2CoagPipe, [90; 0]*deg, ND_CoagPiping, PS_Modules)
CoagTeePipe := PipeF([
    ThirdCoagPipe_Origin[0] + ShortTeeLength(ND_CoagPiping);
    ThirdCoagPipe_Origin[1] - ElbowRadius(ND_CoagPiping) - L_Coag2CoagPipe - 0.5*TeeLength(ND_CoagPiping);
    ThirdCoagPipe_Origin[2] - L_ThirdPipe
], L_FirstPipe, [180; 0]*deg, ND_CoagPiping, PS_Modules)
CoagYPipe := PipeF([
    ThirdCoagPipe_Origin[0] + ShortTeeLength(ND_CoagPiping) + L_FirstPipe + ElbowRadius(ND_CoagPiping);
    ThirdCoagPipe_Origin[1] - 2*ElbowRadius(ND_CoagPiping) - L_Coag2CoagPipe - 0.5*TeeLength(ND_CoagPiping);
    ThirdCoagPipe_Origin[2] - L_ThirdPipe
], L_CoagYCorrection, [90; 0]*deg, ND_CoagPiping, PS_Modules)
CoagXPipe := PipeF([
    ThirdCoagPipe_Origin[0] + ShortTeeLength(ND_CoagPiping) + L_FirstPipe + 2*ElbowRadius(ND_CoagPiping);
    ThirdCoagPipe_Origin[1] - 3*ElbowRadius(ND_CoagPiping) - L_Coag2CoagPipe - 0.5*TeeLength(ND_CoagPiping) - L_CoagYCorrection;
    ThirdCoagPipe_Origin[2] - L_ThirdPipe
], L_CoagXCorrection, [180; 0]*deg, ND_CoagPiping, PS_Modules)
ChlorfirstXPipe := PipeF([
    ChlorineTank_Origin[0] + ShortTeeLength(ND_CoagPiping);
    ChlorineTank_Origin[1] + .5*(2*(S_ChemTankBorder + R_ChlorineTank + T_ChemTankWall) - W_EtChemPlatform);
    ThirdChlorPipe_Origin[2] - L_ThirdPipe
], L_ChlorfirstXCorrection, [180; 0]*deg, ND_CoagPiping, PS_Modules)
ChlorsecondXPipe := PipeF([
    (ChlorineTank_Origin[0] + ShortTeeLength(ND_CoagPiping)) + L_ChlorfirstXCorrection + ElbowRadius(ND_CoagPiping) + ElbowRadius(ND_CoagPiping);
    (ChlorineTank_Origin[1] + .5*(2*(S_ChemTankBorder + R_ChlorineTank + T_ChemTankWall) - W_EtChemPlatform) + ElbowRadius(ND_CoagPiping)) + L_ChlorfirstYCorrection + ElbowRadius(ND_CoagPiping);
    ThirdChlorPipe_Origin[2] - L_ThirdPipe
], L_ChlorsecondXCorrection, [180; 0]*deg, ND_CoagPiping, PS_Modules)
ChlorfirstYPipe := PipeF([
    (ChlorineTank_Origin[0] + ShortTeeLength(ND_CoagPiping)) + L_ChlorfirstXCorrection + ElbowRadius(ND_CoagPiping);
    ChlorineTank_Origin[1] + .5*(2*(S_ChemTankBorder + R_ChlorineTank + T_ChemTankWall) - W_EtChemPlatform) + ElbowRadius(ND_CoagPiping);
    ThirdChlorPipe_Origin[2] - L_ThirdPipe
], L_ChlorfirstYCorrection, [270; 0]*deg, ND_CoagPiping, PS_Modules)
ChlorsecondYPipe := PipeF([
    ((ChlorineTank_Origin[0] + ShortTeeLength(ND_CoagPiping)) + L_ChlorfirstXCorrection + ElbowRadius(ND_CoagPiping) + 2*ElbowRadius(ND_CoagPiping)) + L_ChlorsecondXCorrection;
    (ChlorineTank_Origin[1] + .5*(2*(S_ChemTankBorder + R_ChlorineTank + T_ChemTankWall) - W_EtChemPlatform) + ElbowRadius(ND_CoagPiping)) + L_ChlorfirstYCorrection;
    ThirdChlorPipe_Origin[2] - L_ThirdPipe
], L_ChlorsecondYCorrection, [90; 0]*deg, ND_CoagPiping, PS_Modules)
ChlorthirdXPipe := PipeF([
    ((ChlorineTank_Origin[0] + ShortTeeLength(ND_CoagPiping)) + L_ChlorfirstXCorrection + ElbowRadius(ND_CoagPiping) + 2*ElbowRadius(ND_CoagPiping)) + L_ChlorsecondXCorrection + ElbowRadius(ND_CoagPiping);
    ((ChlorineTank_Origin[1] + .5*(2*(S_ChemTankBorder + R_ChlorineTank + T_ChemTankWall) - W_EtChemPlatform) + ElbowRadius(ND_CoagPiping)) + L_ChlorfirstYCorrection) - L_ChlorsecondYCorrection - ElbowRadius(ND_CoagPiping);
    ThirdChlorPipe_Origin[2] - L_ThirdPipe
], L_ChlorthirdXCorrection, [180; 0]*deg, ND_CoagPiping, PS_Modules)
FCTeePipe := PipeF([
    ThirdFCPipe_Origin[0] + 0.5*TeeLength(ND_CoagPiping);
    ThirdFCPipe_Origin[1] - L_FC2FCPipe - T_ChemTankWall;
    ThirdFCPipe_Origin[2] - L_ThirdPipe
], L_FirstPipe, [180; 0]*deg, ND_CoagPiping, PS_Modules)
FCYPipe := PipeF([
    FilterCoagTank_Origin[0] + ShortTeeLength(ND_CoagPiping) + L_FCfirstXCorrection + ElbowRadius(ND_CoagPiping);
    (FilterCoagTank_Origin[1] - (R_FilterCoagTank + (L_FirstPipe + L_BallValve + L_SecondPipe)) - 2*ElbowRadius(ND_CoagPiping)) - L_FC2FCPipe - .5*TeeLength(ND_CoagPiping) - ElbowRadius(ND_CoagPiping) - T_ChemTankWall;
    ThirdFCPipe_Origin[2] - L_ThirdPipe
], L_FCYCorrection, [90; 0]*deg, ND_CoagPiping, PS_Modules)
FCfirstXPipe := PipeF([
    FilterCoagTank_Origin[0] + ShortTeeLength(ND_CoagPiping);
    (FilterCoagTank_Origin[1] - (R_FilterCoagTank + (L_FirstPipe + L_BallValve + L_SecondPipe)) - 2*ElbowRadius(ND_CoagPiping)) - L_FC2FCPipe - .5*TeeLength(ND_CoagPiping) - T_ChemTankWall;
    ThirdFCPipe_Origin[2] - L_ThirdPipe
], L_FCfirstXCorrection, [180; 0]*deg, ND_CoagPiping, PS_Modules)
FCsecondXPipe := PipeF([
    FilterCoagTank_Origin[0] + ShortTeeLength(ND_CoagPiping) + L_FCfirstXCorrection + 2*ElbowRadius(ND_CoagPiping);
    ((FilterCoagTank_Origin[1] - (R_FilterCoagTank + (L_FirstPipe + L_BallValve + L_SecondPipe)) - 2*ElbowRadius(ND_CoagPiping)) - L_FC2FCPipe - .5*TeeLength(ND_CoagPiping) - ElbowRadius(ND_CoagPiping) - T_ChemTankWall) - L_FCYCorrection - ElbowRadius(ND_CoagPiping);
    ThirdFCPipe_Origin[2] - L_ThirdPipe
], L_FCsecondXCorrection, [180; 0]*deg, ND_CoagPiping, PS_Modules)
LayerChemPipFrz := FreezeLayer("ChemPipingPlu")
ChemPiping := stack(LayerNewChemConnections, CoagElbow, CoagElbow2, CoagTee, ChlorTee, FCTee, CoagElbow3, CoagElbow4, ChlorElbow2, ChlorElbow3, ChlorElbow4, ChlorElbow5, FCElbow2, FCElbow3, LayerChemConnFrz, LayerNewChemPiping, Coag2CoagPipe1, Coag2CoagPipe2, CoagTeePipe, CoagYPipe, CoagXPipe, ChlorfirstXPipe, ChlorfirstYPipe, ChlorsecondXPipe, ChlorsecondYPipe, ChlorthirdXPipe, FCfirstXPipe, FCYPipe, FCsecondXPipe, LayerChemPipFrz)
ChemPipingNoFC := stack(LayerNewChemConnections, CoagElbow, CoagElbow2, CoagTee, ChlorTee, CoagElbow3, CoagElbow4, ChlorElbow2, ChlorElbow3, ChlorElbow4, ChlorElbow5, LayerChemConnFrz, LayerNewChemPiping, Coag2CoagPipe1, Coag2CoagPipe2, CoagTeePipe, CoagYPipe, CoagXPipe, ChlorfirstXPipe, ChlorfirstYPipe, ChlorsecondXPipe, ChlorsecondYPipe, ChlorthirdXPipe, LayerChemPipFrz)
L_CoagDrainXCorrection := R_CoagTank + T_ChemTankWall + S_ChemTankBorder - T_PlantWall - outerdiameter(ND_CoagPiping)
L_CoagDrainYCorrection := 0.5*W_EtChemPlatform - (R_CoagTank + T_ChemTankWall + S_ChemTankBorder) - L_PlatformDrainHole + 1.5*outerdiameter(ND_CoagPiping)
L_ChlorDrainXCorrection := 2*R_CoagTank + 3*T_ChemTankWall + R_ChlorineTank + 2*S_ChemTankBorder - T_PlantWall - outerdiameter(ND_CoagPiping)
L_ChlorDrainYCorrection := 0.5*W_EtChemPlatform - (R_ChlorineTank + T_ChemTankWall + S_ChemTankBorder) - L_PlatformDrainHole + 4.5*outerdiameter(ND_CoagPiping)
L_Chlor2DrainXCorrection := 2*R_CoagTank + 5*T_ChemTankWall + 3*R_ChlorineTank + 3*S_ChemTankBorder - T_PlantWall - outerdiameter(ND_CoagPiping)
L_Chlor2DrainYCorrection := 0.5*W_EtChemPlatform - (R_FilterCoagTank + T_ChemTankWall + S_ChemTankBorder) - L_PlatformDrainHole + 7.5*outerdiameter(ND_CoagPiping)
L_ZCorrection := Z_CoagulantTankBottom - Z_Walkway - L_DrainPipe - outerdiameter(ND_CoagPiping)
L_ConnPipe := T_PlantWall + outerdiameter(ND_CoagPiping) - ElbowRadius(ND_CoagPiping)
LayerNewChemDrainConnections := layer_new("ChemDrainConnectionsPlu", green)
CoagDrainElbow := ElbowF(CoagTank_Origin + [0 m; 0 m; -L_BulkheadFittingEnd - L_MaleInsertEnd - L_DrainPipe + ElbowRadius(ND_CoagPiping)], [90; 270; 0]*deg, ND_CoagPiping, PS_Modules)
CoagDrainElbow2 := ElbowF(CoagTank_Origin + [
    0 m;
    ElbowRadius(ND_CoagPiping) - L_CoagDrainYCorrection;
    -L_BulkheadFittingEnd - L_MaleInsertEnd - L_DrainPipe
], [180; 0; 0]*deg, ND_CoagPiping, PS_Modules)
CoagDrainElbow3 := ElbowF(CoagTank_Origin + [
    L_CoagDrainXCorrection - ElbowRadius(ND_CoagPiping);
    -L_CoagDrainYCorrection;
    -L_BulkheadFittingEnd - L_MaleInsertEnd - L_DrainPipe
], [-90; 0; -90]*deg, ND_CoagPiping, PS_Modules)
CoagDrainElbow4 := ElbowF(CoagTank_Origin + [
    L_CoagDrainXCorrection;
    -L_CoagDrainYCorrection;
    -L_BulkheadFittingEnd - L_MaleInsertEnd - L_DrainPipe - L_ZCorrection + ElbowRadius(ND_CoagPiping)
], [0; 180; 270]*deg, ND_CoagPiping, PS_Modules)
CoagDrainElbow5 := ElbowF(CoagTank_Origin + [
    L_CoagDrainXCorrection + L_BallValve + 2*SocketDepth(ND_CoagPiping) + L_ConnPipe;
    -L_CoagDrainYCorrection;
    -L_BulkheadFittingEnd - L_MaleInsertEnd - L_DrainPipe - L_ZCorrection
], [-90; 0; -90]*deg, ND_CoagPiping, PS_Modules)
ChlorDrainElbow := ElbowF(ChlorineTank_Origin + [0 m; 0 m; -L_BulkheadFittingEnd - L_MaleInsertEnd - L_DrainPipe + ElbowRadius(ND_CoagPiping)], [90; 270; 0]*deg, ND_CoagPiping, PS_Modules)
ChlorDrainElbow2 := ElbowF(ChlorineTank_Origin + [
    0 m;
    ElbowRadius(ND_CoagPiping) - L_ChlorDrainYCorrection;
    -L_BulkheadFittingEnd - L_MaleInsertEnd - L_DrainPipe
], [180; 0; 0]*deg, ND_CoagPiping, PS_Modules)
ChlorDrainElbow3 := ElbowF(ChlorineTank_Origin + [
    L_ChlorDrainXCorrection - ElbowRadius(ND_CoagPiping);
    -L_ChlorDrainYCorrection;
    -L_BulkheadFittingEnd - L_MaleInsertEnd - L_DrainPipe
], [-90; 0; -90]*deg, ND_CoagPiping, PS_Modules)
ChlorDrainElbow4 := ElbowF(ChlorineTank_Origin + [
    L_ChlorDrainXCorrection;
    -L_ChlorDrainYCorrection;
    -L_BulkheadFittingEnd - L_MaleInsertEnd - L_DrainPipe - L_ZCorrection + ElbowRadius(ND_CoagPiping)
], [0; 180; 270]*deg, ND_CoagPiping, PS_Modules)
ChlorDrainElbow5 := ElbowF(ChlorineTank_Origin + [
    L_ChlorDrainXCorrection + L_BallValve + 2*SocketDepth(ND_CoagPiping) + L_ConnPipe;
    -L_ChlorDrainYCorrection;
    -L_BulkheadFittingEnd - L_MaleInsertEnd - L_DrainPipe - L_ZCorrection
], [-90; 0; -90]*deg, ND_CoagPiping, PS_Modules)
Chlor2DrainElbow := ElbowF(ChlorineTank_Origin + [
    -2*R_ChlorineTank - S_ChemTankBorder - 2*T_ChemTankWall;
    0 m;
    -L_BulkheadFittingEnd - L_MaleInsertEnd - L_DrainPipe + ElbowRadius(ND_CoagPiping)
], [90; 270; 0]*deg, ND_CoagPiping, PS_Modules)
Chlor2DrainElbow2 := ElbowF(ChlorineTank_Origin + [
    -2*R_ChlorineTank - S_ChemTankBorder - 2*T_ChemTankWall;
    ElbowRadius(ND_CoagPiping) - L_Chlor2DrainYCorrection;
    -L_BulkheadFittingEnd - L_MaleInsertEnd - L_DrainPipe
], [180; 0; 0]*deg, ND_CoagPiping, PS_Modules)
Chlor2DrainElbow3 := ElbowF(ChlorineTank_Origin + [
    -2*R_ChlorineTank - S_ChemTankBorder - 2*T_ChemTankWall + L_Chlor2DrainXCorrection - ElbowRadius(ND_CoagPiping);
    -L_Chlor2DrainYCorrection;
    -L_BulkheadFittingEnd - L_MaleInsertEnd - L_DrainPipe
], [-90; 0; -90]*deg, ND_CoagPiping, PS_Modules)
Chlor2DrainElbow4 := ElbowF(ChlorineTank_Origin + [
    -2*R_ChlorineTank - S_ChemTankBorder - 2*T_ChemTankWall + L_Chlor2DrainXCorrection;
    -L_Chlor2DrainYCorrection;
    -L_BulkheadFittingEnd - L_MaleInsertEnd - L_DrainPipe - L_ZCorrection + ElbowRadius(ND_CoagPiping)
], [0; 180; 270]*deg, ND_CoagPiping, PS_Modules)
Chlor2DrainElbow5 := ElbowF(ChlorineTank_Origin + [
    -2*R_ChlorineTank - S_ChemTankBorder - 2*T_ChemTankWall + L_Chlor2DrainXCorrection + L_BallValve + 2*SocketDepth(ND_CoagPiping) + L_ConnPipe;
    -L_Chlor2DrainYCorrection;
    -L_BulkheadFittingEnd - L_MaleInsertEnd - L_DrainPipe - L_ZCorrection
], [-90; 0; -90]*deg, ND_CoagPiping, PS_Modules)
CoagDrainBallValve := insertdwg("https://confluence.cornell.edu/download/attachments/173604905/BallValve.dwg", CoagTank_Origin + [
    L_CoagDrainXCorrection + L_ConnPipe - SocketDepth(ND_CoagPiping);
    -L_CoagDrainYCorrection;
    -L_BulkheadFittingEnd - L_MaleInsertEnd - L_DrainPipe - L_ZCorrection
], 1/250, 1/250, -90 deg)
RotateCoagBallValve := Rotate3DLast(CoagTank_Origin + [
    L_CoagDrainXCorrection + L_ConnPipe - SocketDepth(ND_CoagPiping);
    -L_CoagDrainYCorrection;
    -L_BulkheadFittingEnd - L_MaleInsertEnd - L_DrainPipe - L_ZCorrection
], "Y", 90 deg)
ChlorDrainBallValve := insertdwg("https://confluence.cornell.edu/download/attachments/173604905/BallValve.dwg", ChlorineTank_Origin + [
    L_ChlorDrainXCorrection + L_ConnPipe - SocketDepth(ND_CoagPiping);
    -L_ChlorDrainYCorrection;
    -L_BulkheadFittingEnd - L_MaleInsertEnd - L_DrainPipe - L_ZCorrection
], 1/250, 1/250, -90 deg)
RotateChlorBallValve := Rotate3DLast(ChlorineTank_Origin + [
    L_ChlorDrainXCorrection + L_ConnPipe - SocketDepth(ND_CoagPiping);
    -L_ChlorDrainYCorrection;
    -L_BulkheadFittingEnd - L_MaleInsertEnd - L_DrainPipe - L_ZCorrection
], "Y", 90 deg)
Chlor2DrainBallValve := insertdwg("https://confluence.cornell.edu/download/attachments/173604905/BallValve.dwg", ChlorineTank_Origin + [
    -2*R_ChlorineTank - S_ChemTankBorder - 2*T_ChemTankWall + L_Chlor2DrainXCorrection + L_ConnPipe - SocketDepth(ND_CoagPiping);
    -L_Chlor2DrainYCorrection;
    -L_BulkheadFittingEnd - L_MaleInsertEnd - L_DrainPipe - L_ZCorrection
], 1/250, 1/250, -90 deg)
RotateChlor2BallValve := Rotate3DLast(ChlorineTank_Origin + [
    -2*R_ChlorineTank - S_ChemTankBorder - 2*T_ChemTankWall + L_Chlor2DrainXCorrection + L_ConnPipe - SocketDepth(ND_CoagPiping);
    -L_Chlor2DrainYCorrection;
    -L_BulkheadFittingEnd - L_MaleInsertEnd - L_DrainPipe - L_ZCorrection
], "Y", 90 deg)
LayerChemConnFrz := FreezeLayer("ChemDrainConnectionsPlu")
LayerNewChemDrainPiping := layer_new("ChemDrainPipingPlu", blue)
CoagYDrainPipe := PipeF(CoagTank_Origin + [0 m; -ElbowRadius(ND_CoagPiping); -L_BulkheadFittingEnd - L_MaleInsertEnd - L_DrainPipe], L_CoagDrainYCorrection - 2*ElbowRadius(ND_CoagPiping), [90; 0]*deg, ND_CoagPiping, PS_Modules)
CoagXDrainPipe := PipeF(CoagTank_Origin + [
    ElbowRadius(ND_CoagPiping);
    -L_CoagDrainYCorrection;
    -L_BulkheadFittingEnd - L_MaleInsertEnd - L_DrainPipe
], L_CoagDrainXCorrection - 2*ElbowRadius(ND_CoagPiping), [180; 0]*deg, ND_CoagPiping, PS_Modules)
CoagZDrainPipe := PipeF(CoagTank_Origin + [
    L_CoagDrainXCorrection;
    -L_CoagDrainYCorrection;
    -L_BulkheadFittingEnd - L_MaleInsertEnd - L_DrainPipe - ElbowRadius(ND_CoagPiping)
], L_ZCorrection - 2*ElbowRadius(ND_CoagPiping), [0; 270]*deg, ND_CoagPiping, PS_Modules)
ChlorYDrainPipe := PipeF(ChlorineTank_Origin + [0 m; -ElbowRadius(ND_CoagPiping); -L_BulkheadFittingEnd - L_MaleInsertEnd - L_DrainPipe], L_ChlorDrainYCorrection - 2*ElbowRadius(ND_CoagPiping), [90; 0]*deg, ND_CoagPiping, PS_Modules)
ChlorXDrainPipe := PipeF(ChlorineTank_Origin + [
    ElbowRadius(ND_CoagPiping);
    -L_ChlorDrainYCorrection;
    -L_BulkheadFittingEnd - L_MaleInsertEnd - L_DrainPipe
], L_ChlorDrainXCorrection - 2*ElbowRadius(ND_CoagPiping), [180; 0]*deg, ND_CoagPiping, PS_Modules)
ChlorZDrainPipe := PipeF(ChlorineTank_Origin + [
    L_ChlorDrainXCorrection;
    -L_ChlorDrainYCorrection;
    -L_BulkheadFittingEnd - L_MaleInsertEnd - L_DrainPipe - ElbowRadius(ND_CoagPiping)
], L_ZCorrection - 2*ElbowRadius(ND_CoagPiping), [0; 270]*deg, ND_CoagPiping, PS_Modules)
Chlor2YDrainPipe := PipeF(ChlorineTank_Origin + [
    -2*R_ChlorineTank - S_ChemTankBorder - 2*T_ChemTankWall;
    -ElbowRadius(ND_CoagPiping);
    -L_BulkheadFittingEnd - L_MaleInsertEnd - L_DrainPipe
], L_Chlor2DrainYCorrection - 2*ElbowRadius(ND_CoagPiping), [90; 0]*deg, ND_CoagPiping, PS_Modules)
Chlor2XDrainPipe := PipeF(ChlorineTank_Origin + [
    -2*R_ChlorineTank - S_ChemTankBorder - 2*T_ChemTankWall + ElbowRadius(ND_CoagPiping);
    -L_Chlor2DrainYCorrection;
    -L_BulkheadFittingEnd - L_MaleInsertEnd - L_DrainPipe
], L_Chlor2DrainXCorrection - 2*ElbowRadius(ND_CoagPiping), [180; 0]*deg, ND_CoagPiping, PS_Modules)
Chlor2ZDrainPipe := PipeF(ChlorineTank_Origin + [
    -2*R_ChlorineTank - S_ChemTankBorder - 2*T_ChemTankWall + L_Chlor2DrainXCorrection;
    -L_Chlor2DrainYCorrection;
    -L_BulkheadFittingEnd - L_MaleInsertEnd - L_DrainPipe - ElbowRadius(ND_CoagPiping)
], L_ZCorrection - 2*ElbowRadius(ND_CoagPiping), [0; 270]*deg, ND_CoagPiping, PS_Modules)
CoagConnPipe := PipeF(CoagTank_Origin + [
    L_CoagDrainXCorrection + ElbowRadius(ND_CoagPiping);
    -L_CoagDrainYCorrection;
    -L_BulkheadFittingEnd - L_MaleInsertEnd - L_DrainPipe - L_ZCorrection
], L_ConnPipe - ElbowRadius(ND_CoagPiping), [180; 0]*deg, ND_CoagPiping, PS_Modules)
ChlorConnPipe := PipeF(ChlorineTank_Origin + [
    L_ChlorDrainXCorrection + ElbowRadius(ND_CoagPiping);
    -L_ChlorDrainYCorrection;
    -L_BulkheadFittingEnd - L_MaleInsertEnd - L_DrainPipe - L_ZCorrection
], L_ConnPipe - ElbowRadius(ND_CoagPiping), [180; 0]*deg, ND_CoagPiping, PS_Modules)
Chlor2ConnPipe := PipeF(ChlorineTank_Origin + [
    -2*R_ChlorineTank - S_ChemTankBorder - 2*T_ChemTankWall + L_Chlor2DrainXCorrection + ElbowRadius(ND_CoagPiping);
    -L_Chlor2DrainYCorrection;
    -L_BulkheadFittingEnd - L_MaleInsertEnd - L_DrainPipe - L_ZCorrection
], L_ConnPipe - ElbowRadius(ND_CoagPiping), [180; 0]*deg, ND_CoagPiping, PS_Modules)
CoagConnPipe2 := PipeF(CoagTank_Origin + [
    L_CoagDrainXCorrection + L_BallValve + L_ConnPipe;
    -L_CoagDrainYCorrection;
    -L_BulkheadFittingEnd - L_MaleInsertEnd - L_DrainPipe - L_ZCorrection
], 2*SocketDepth(ND_CoagPiping), [180; 0]*deg, ND_CoagPiping, PS_Modules)
ChlorConnPipe2 := PipeF(ChlorineTank_Origin + [
    L_ChlorDrainXCorrection + L_BallValve + L_ConnPipe;
    -L_ChlorDrainYCorrection;
    -L_BulkheadFittingEnd - L_MaleInsertEnd - L_DrainPipe - L_ZCorrection
], 2*SocketDepth(ND_CoagPiping), [180; 0]*deg, ND_CoagPiping, PS_Modules)
Chlor2ConnPipe2 := PipeF(ChlorineTank_Origin + [
    -2*R_ChlorineTank - S_ChemTankBorder - 2*T_ChemTankWall + L_Chlor2DrainXCorrection + L_BallValve + L_ConnPipe;
    -L_Chlor2DrainYCorrection;
    -L_BulkheadFittingEnd - L_MaleInsertEnd - L_DrainPipe - L_ZCorrection
], 2*SocketDepth(ND_CoagPiping), [180; 0]*deg, ND_CoagPiping, PS_Modules)
LayerChemDrainPipingFrz := FreezeLayer("ChemDrainPipingPlu")
ThawDrainPieces := ThawMultiple(["ChemDrainConnectionsPlu"; "ChemDrainPipingPlu"])
MirrorDrainPieces := MirrorAll([
    CoagTank_Origin[0] - (R_CoagTank + T_ChemTankWall) + zc;
    CoagTank_Origin[1] + R_CoagTank + T_ChemTankWall + S_ChemTankBorder - 0.5*W_EtChemPlatform
], [
    CoagTank_Origin[0] - (R_CoagTank + T_ChemTankWall) - zc;
    CoagTank_Origin[1] + R_CoagTank + T_ChemTankWall + S_ChemTankBorder - 0.5*W_EtChemPlatform
], "n")
FreezeDrainPieces := FreezeMultiple(["ChemDrainConnectionsPlu"; "ChemDrainPipingPlu"])
ChemDrainPiping := stack(LayerNewChemDrainConnections, CoagDrainElbow, CoagDrainElbow2, CoagDrainElbow3, CoagDrainElbow4, CoagDrainElbow5, ChlorDrainElbow, ChlorDrainElbow2, ChlorDrainElbow3, ChlorDrainElbow4, ChlorDrainElbow5, Chlor2DrainElbow, Chlor2DrainElbow2, Chlor2DrainElbow3, Chlor2DrainElbow4, Chlor2DrainElbow5, CoagDrainBallValve, RotateCoagBallValve, ChlorDrainBallValve, RotateChlorBallValve, Chlor2DrainBallValve, RotateChlor2BallValve, LayerChemConnFrz, LayerNewChemDrainPiping, CoagYDrainPipe, CoagXDrainPipe, CoagZDrainPipe, ChlorYDrainPipe, ChlorXDrainPipe, ChlorZDrainPipe, Chlor2YDrainPipe, Chlor2XDrainPipe, Chlor2ZDrainPipe, CoagConnPipe, ChlorConnPipe, Chlor2ConnPipe, CoagConnPipe2, ChlorConnPipe2, Chlor2ConnPipe2, LayerChemDrainPipingFrz, ThawDrainPieces, MirrorDrainPieces, FreezeDrainPieces)
ChemDrainPipingNoFC := stack(LayerNewChemDrainConnections, CoagDrainElbow, CoagDrainElbow2, CoagDrainElbow3, CoagDrainElbow4, CoagDrainElbow5, ChlorDrainElbow, ChlorDrainElbow2, ChlorDrainElbow3, ChlorDrainElbow4, ChlorDrainElbow5, CoagDrainBallValve, RotateCoagBallValve, ChlorDrainBallValve, RotateChlorBallValve, LayerChemConnFrz, LayerNewChemDrainPiping, CoagYDrainPipe, CoagXDrainPipe, CoagZDrainPipe, ChlorYDrainPipe, ChlorXDrainPipe, ChlorZDrainPipe, CoagConnPipe, ChlorConnPipe, CoagConnPipe2, ChlorConnPipe2, LayerChemDrainPipingFrz, ThawDrainPieces, MirrorDrainPieces, FreezeDrainPieces)
# Draw the drainage plumbing
UnfreezeCoagMirrorPieces := ThawMultiple(["CoagTanks"; "CoagConnectionsPlu"])
MirrorAllCoagTanks := Mirror3dAll("YZ", [Plant_Origin[0] - 1/2*L_Sed; 0 m; 0 m], "Y")
# mirror when there is an odd number off floc channels,
# mirroring is in the second one. This should not happen anymore.
CoagMirrorAll := stack(UnfreezeCoagMirrorPieces, MirrorAllCoagTanks)
# If needed, mirror coagulant tanks and plumbing to other side of the entrance tank
CoagTanks := stack(DrawCoagTanks, CoagPlu, CoagTankReflect, CoagNoReflect)
ChlorTanks := stack(DrawChlorTanks, ChlorPlu, ChlorTankReflect, ChlorNoReflect)
FilterCoagTanks := stack(DrawFilterCoagTanks, FilterCoagPlu, FilterCoagTankReflect)
AC_ChemTanks :=
    stack(ChemPlatform, CoagTanks, ChlorTanks, FilterCoagTanks, ChemPiping, ChemDrainPiping) if FilterCoag == 1
    stack(ChemPlatform, CoagTanks, ChlorTanks, ChemPipingNoFC, ChemDrainPipingNoFC) otherwise
# Draw Stock Tank Mixer
# [component: inputs AC_ChemTanks]
