# [reference: SampleInputs.xmcd]
# [reference: EtFlocSedFi.xmcd]
H_ChemPlatformWall := 1 m
W_ChemWalkwayMin := 0.8 m
S_FiBoxToChemPlatformMin := 0.8 m
W_EtWalkwayOpt := 1.5 m
W_EtWalkwayMax := 2 m
W_ChemStairsOpt := 1.2 m
# Chemical Stock Tank AutoCAD
Z_ChemPlatform := Z_CoagTank - T_ChemTankWall
# Layers | mrf222 Spring 2016
OpChemPlatformLayer := layer_new("OpChemPlatformCon", grey)
SelectOpChemPlatform := SelectLayer("OpChemPlatformCon")
OpChemPlatformFrz := FreezeLayer("OpChemPlatformCon")
SubtractFromOpChemPlatform := SubtractF(["OpChemPlatformCon"], "DeleteMe")
ChemCoagTankLayer := layer_new("ChemCoagTank", purple)
SelectChemCoagTank := SelectLayer("ChemCoagTank")
ChemCoagTankFrz := FreezeLayer("ChemCoagTank")
SubtractFromChemCoagTank := SubtractF(["ChemCoagTank"], "DeleteMe")
ChemChlorineTankLayer := layer_new("ChemChlorineTank", ltpurple)
SelectChemChlorineTank := SelectLayer("ChemChlorineTank")
ChemChlorineTankFrz := FreezeLayer("ChemChlorineTank")
SubtractFromChemChlorineTank := SubtractF(["ChemChlorineTank"], "DeleteMe")
ChemCoagFittingLayer := layer_new("ChemCoagFittingPlu", green)
SelectChemCoagFitting := SelectLayer("ChemCoagFittingPlu")
ChemCoagFittingFrz := FreezeLayer("ChemCoagFittingPlu")
ChemCoagPipeLayer := layer_new("ChemCoagPipePlu", blue)
SelectChemCoagPipe := SelectLayer("ChemCoagPipePlu")
ChemCoagPipeFrz := FreezeLayer("ChemCoagPipePlu")
ChemChlorineFittingLayer := layer_new("ChemChlorineFittingPlu", green)
SelectChemChlorineFitting := SelectLayer("ChemChlorineFittingPlu")
ChemChlorineFittingFrz := FreezeLayer("ChemChlorineFittingPlu")
ChemChlorinePipeLayer := layer_new("ChemChlorinePipePlu", blue)
SelectChemChlorinePipe := SelectLayer("ChemChlorinePipePlu")
ChemChlorinePipeFrz := FreezeLayer("ChemChlorinePipePlu")
ChemDrainFittingLayer := layer_new("ChemDrainFittingPlu", green)
SelectChemDrainFitting := SelectLayer("ChemDrainFittingPlu")
ChemDrainFittingFrz := FreezeLayer("ChemDrainFittingPlu")
ChemDrainPipeLayer := layer_new("ChemDrainPipePlu", blue)
SelectChemDrainPipe := SelectLayer("ChemDrainPipePlu")
ChemDrainPipeFrz := FreezeLayer("ChemDrainPipePlue")
ChemDrainValveLayer := layer_new("ChemDrainValve", green)
SelectChemDrainValve := SelectLayer("ChemDrainValve")
ChemDrainValveFrz := FreezeLayer("ChemDrainValve")
ChemToCalColPipeLayer := layer_new("ChemToCalColPipe", blue)
SelectChemToCalColPipe := SelectLayer("ChemToCalColPipe")
ChemToCalColPipeFrz := FreezeLayer("ChemToCalColPipe")
ChemToCalColFittingLayer := layer_new("ChemToCalColFitting", green)
SelectChemToCalColFitting := SelectLayer("ChemToCalColFitting")
ChemToCalColFittingFrz := FreezeLayer("ChemToCalColFitting")
# mrf222 Spring 2016
# Chemical platform masonry
W_PlantStairwell := W_BasementStairs + T_PlantWall + W_EntranceStairs
EN_Stairwell :=
    0 if (Et_Origin[1] + W_Et + T_FlocWall + W_EtWalkwayMax) - (Fi_origin[1] + N_Fi*(W_Fi + T_FiWall)) - (S_ChemTankBorder + 2*R_CoagTank + W_ChemWalkwayMin + T_PlantWall) < W_PlantStairwell
    1 otherwise
W_ChemStairs :=
    1 m if EN_Stairwell == 0
    1.2 m otherwise
W_EtWalkwayFitChem := (S_ChemTankBorder + 2*R_CoagTank + W_ChemWalkwayMin + T_PlantWall + W_PlantStairwell*(EN_Stairwell == 1) + W_ChemStairs*(EN_Stairwell == 0)) - ((Et_Origin[1] + W_Et + T_FlocWall) - (Fi_origin[1] + N_Fi*(W_Fi + T_FiWall)))
W_EtWalkway := max(W_EtWalkwayOpt, W_EtWalkwayFitChem)
# Dimension calculations
W_ChemPlatform := (Et_Origin[0] - L_Et - T_FlocWall - W_DCWalkway - T_PlantWall) - (Fi_origin[0] - L_Fi - T_FiWall + T_PlantWall)  # X dimension
L_ChemPlatform := (Et_Origin[1] + W_Et + T_FlocWall + W_EtWalkway) - ((Fi_origin[1] + N_Fi*(W_Fi + T_FiWall) + W_PlantStairwell)*(EN_Stairwell == 1) + (FiInletChannel_Origin[1] + L_FiInletChannel + T_FiBoxWall + S_FiBoxToChemPlatformMin + T_PlantWall + W_ChemStairs)*(EN_Stairwell == 0) + T_PlantWall)
# Y dimension
H_ChemStairs := Z_ChemPlatform - Z_Walkway
L_ChemStairs :=
    L_Stairs(H_ChemStairs) if EN_Stairwell == 0
    W_EntranceStairs otherwise
H_ChemStair := H_StairFixed(L_ChemStairs, H_ChemStairs)
W_ChemStair := W_StairFixed(L_ChemStairs)
# Slab and stair origins and dimensions
ChemPlatformFloor_Origin := [
    Et_Origin[0] - L_Et - T_FlocWall - W_DCWalkway - T_PlantWall;
    Et_Origin[1] + W_Et + T_FlocWall + W_EtWalkway;
    Z_ChemPlatform
]
ChemPlatformFloor_Dim := [-W_ChemPlatform; -L_ChemPlatform; -T_ChemSlab]
ChemStairsY_Origin := ChemPlatformFloor_Origin + [-W_ChemPlatform + W_ChemStairs; -L_ChemPlatform - T_PlantWall; 0 m]
# If chem stairs oriented down the Y axis, bridging the stairwell in the case of a stairwell
ChemStairsX_Origin := ChemPlatformFloor_Origin + [T_PlantWall - L_ChemStairs; -L_ChemPlatform - T_PlantWall; 0 m]
# If chem stairs oriented in the X axis, in the case of no stairwell
H_ChemWallsTotal := Z_ChemPlatform + H_ChemPlatformWall - Z_Walkway
# Chem platform slabs
ChemPlatformFloor := BoxF(ChemPlatformFloor_Origin, ChemPlatformFloor_Origin + ChemPlatformFloor_Dim, [0; 0; 0]*deg)
ChemStairs :=
    StairsFixedF(ChemStairsX_Origin, W_ChemStairs, H_ChemStairs, L_ChemStairs, 0 deg) if EN_Stairwell == 0
    StairsFixedF(ChemStairsY_Origin, W_ChemStairs, H_ChemStairs, L_ChemStairs, -90 deg) otherwise
ChemStairLanding :=
    BoxF(ChemStairsX_Origin + [0 m; T_PlantWall; 0 m], ChemStairsX_Origin + [-W_ChemPlatform + L_ChemStairs - T_PlantWall; -W_ChemStairs; -T_ChemSlab], [0; 0; 0]*deg) if EN_Stairwell == 0
    view("t") otherwise
ChemSlabScript := stack(OpChemPlatformLayer, ChemPlatformFloor, ChemStairs, ChemStairLanding)
# Wall origins and dimensions
ChemPlatformEastWall_Origin := [ChemPlatformFloor_Origin[0]; ChemPlatformFloor_Origin[1] + T_PlantWall; Z_Walkway]
ChemPlatformEastWall_Dim := [T_PlantWall; -2*T_PlantWall - L_ChemPlatform; H_ChemWallsTotal]
ChemPlatformNorthWall_Origin := [ChemPlatformFloor_Origin[0] + T_PlantWall; ChemPlatformFloor_Origin[1]; Z_Walkway]
ChemPlatformNorthWall_Dim := [-2*T_PlantWall - W_ChemPlatform; T_PlantWall; H_ChemWallsTotal]
ChemPlatformWestWall_Origin := [ChemPlatformFloor_Origin[0] - W_ChemPlatform; ChemPlatformFloor_Origin[1] + T_PlantWall; Z_Walkway]
ChemPlatformWestWall_Dim := [
    -T_PlantWall;
    -L_ChemPlatform - 2*T_PlantWall - (W_ChemStairs + T_PlantWall)*(EN_Stairwell == 0);
    H_ChemWallsTotal
]
ChemPlatformSouthWall_Origin := [ChemPlatformFloor_Origin[0] + T_PlantWall; ChemPlatformFloor_Origin[1] - L_ChemPlatform; Z_Walkway]
ChemPlatformSouthWall_Dim := [
    -T_PlantWall - (W_ChemPlatform - W_ChemStairs)*(EN_Stairwell == 1) - L_ChemStairs*(EN_Stairwell == 0);
    -T_PlantWall;
    H_ChemWallsTotal
]
ChemStairLandingSouthWall_Origin := [
    ChemPlatformFloor_Origin[0] - W_ChemPlatform - T_PlantWall;
    ChemPlatformFloor_Origin[1] - L_ChemPlatform - T_PlantWall - W_ChemStairs;
    Z_Walkway
]
ChemStairLandingSouthWall_Dim := [2*T_PlantWall + W_ChemPlatform - L_ChemStairs; -T_PlantWall; H_ChemWallsTotal]
# Platform walls
ChemEastWall := BoxF(ChemPlatformEastWall_Origin, ChemPlatformEastWall_Origin + ChemPlatformEastWall_Dim, [0; 0; 0]*deg)
ChemEastWallPipeCut := BoxF([
    ChemPlatformFloor_Origin[0] - zc;
    Et_Origin[1] + W_Et - 6*OD_Fitting(1/2*in) - S_Fitting;
    Z_ChemPlatform - T_ChemSlab - OD_Fitting(1/2*in) - zc
], [ChemPlatformFloor_Origin[0] + T_PlantWall + zc; Et_Origin[1] + W_Et; Z_ChemPlatform - T_ChemSlab], [0; 0; 0]*deg)
ChemNorthWall := BoxF(ChemPlatformNorthWall_Origin, ChemPlatformNorthWall_Origin + ChemPlatformNorthWall_Dim, [0; 0; 0]*deg)
ChemWestWall := BoxF(ChemPlatformWestWall_Origin, ChemPlatformWestWall_Origin + ChemPlatformWestWall_Dim, [0; 0; 0]*deg)
ChemSouthWall := BoxF(ChemPlatformSouthWall_Origin, ChemPlatformSouthWall_Origin + ChemPlatformSouthWall_Dim, [0; 0; 0]*deg)
ChemStairLandingSouthWall :=
    BoxF(ChemStairLandingSouthWall_Origin, ChemStairLandingSouthWall_Origin + ChemStairLandingSouthWall_Dim, [0; 0; 0]*deg) if EN_Stairwell == 0
    view("t") otherwise
ChemStairWall1 :=
    if EN_Stairwell == 1
        WedgeF(ChemStairsY_Origin + [T_PlantWall; -L_ChemStairs; 0 m], ChemStairsY_Origin + [
            T_PlantWall + L_ChemStairs + W_ChemStair + T_PlantFloor;
            -L_ChemStairs + T_PlantWall;
            -H_ChemStairs - T_PlantFloor
        ], [90; 0; 0]*deg)
    view("t") otherwise
ChemStairWall2 :=
    BoxF(ChemStairsY_Origin + [T_PlantWall; -L_ChemStairs; 0 m], ChemStairsY_Origin + [0 m; 0 m; H_ChemPlatformWall], [0; 0; 0]*deg) if EN_Stairwell == 1
    view("t") otherwise
ChemStairWallCut :=
    if EN_Stairwell == 1
        WedgeF(ChemStairsY_Origin + [
            T_PlantWall;
            -L_ChemStairs;
            H_ChemPlatformWall + (T_PlantFloor + W_ChemStair)*(H_ChemStairs + T_PlantFloor)/(L_ChemStairs + W_ChemStair + T_PlantFloor)
        ], ChemStairsY_Origin + [
            T_PlantWall + L_ChemStairs + W_ChemStair + T_PlantFloor;
            -L_ChemStairs + T_PlantWall;
            -H_ChemStairs - T_PlantFloor + H_ChemPlatformWall + (T_PlantFloor + W_ChemStair)*(H_ChemStairs + T_PlantFloor)/(L_ChemStairs + W_ChemStair + T_PlantFloor)
        ], [90; 0; 0]*deg)
    otherwise
        WedgeF(ChemStairsX_Origin + [
            L_ChemStairs;
            T_PlantWall;
            H_ChemPlatformWall + (T_PlantFloor + W_ChemStair)*(H_ChemStairs + T_PlantFloor)/(L_ChemStairs + W_ChemStair + T_PlantFloor)
        ], ChemStairsX_Origin + [
            -W_ChemStair - T_PlantFloor;
            0 m;
            -H_ChemStairs - T_PlantFloor + H_ChemPlatformWall + (T_PlantFloor + W_ChemStair)*(H_ChemStairs + T_PlantFloor)/(L_ChemStairs + W_ChemStair + T_PlantFloor)
        ], [0; 0; 0]*deg)
ChemWallScript := stack(ChemStairWall1, ChemStairWall2, OpChemPlatformFrz, ChemStairWallCut, GroupDelete, SubtractFromOpChemPlatform, SelectOpChemPlatform, ChemEastWall, ChemNorthWall, ChemWestWall, ChemSouthWall, ChemStairLandingSouthWall, Union_All, OpChemPlatformFrz, ChemEastWallPipeCut, GroupDelete, SubtractFromOpChemPlatform)
ChemMasonryScript := stack(ChemSlabScript, ChemWallScript)
# Chem storage tanks
# Origin points
CoagTank_Origin := ChemPlatformFloor_Origin + [-S_ChemTankBorder - R_CoagTank; -S_ChemTankBorder - R_CoagTank; T_ChemTankWall]
ChlorineTank_Origin := CoagTank_Origin + [-3*R_CoagTank - 2*S_ChemTankBorder - R_ChlorTank; R_CoagTank - R_ChlorTank; 0 m]
CoagOutlet_Origin := [CoagTank_Origin[0]; CoagTank_Origin[1] - R_CoagTank; Z_CoagTankOutlet]
ChlorOutlet_Origin := [ChlorineTank_Origin[0]; ChlorineTank_Origin[1] - R_ChlorTank; Z_CoagTankOutlet]
L_ChemTanksTotal := 4*R_CoagTank + 4*R_ChlorTank + 5*S_ChemTankBorder
R_TankOutlet := .75 in
# First coagulant tank
CoagOuterTankWall := CylinderF(CoagTank_Origin - [0 m; 0 m; T_ChemTankWall], R_CoagTank, H_CoagTank, [0; 90]*deg)
CoagInnerTankWall := CylinderF(CoagTank_Origin, R_CoagTank - T_ChemTankWall, H_CoagTank, [0; 90]*deg)
CoagOutletCut := CylinderF(CoagOutlet_Origin + [0 m; -zc; 0 m], R_TankOutlet, 2*zc + T_ChemTankWall, [-90; 0]*deg)
CoagDrainCut := CylinderF(CoagTank_Origin + [0 m; 0 m; zc], R_TankOutlet, 2*zc + T_ChemTankWall, [0; 270]*deg)
CoagTankScript := stack(ChemCoagTankLayer, CoagOuterTankWall, ChemCoagTankFrz, CoagInnerTankWall, CoagOutletCut, CoagDrainCut, GroupDelete, SubtractFromChemCoagTank)
# First chlorine tank
ChlorOuterTankWall := CylinderF(ChlorineTank_Origin - [0 m; 0 m; T_ChemTankWall], R_ChlorTank, H_ChlorTank, [0; 90]*deg)
ChlorInnerTankWall := CylinderF(ChlorineTank_Origin, R_ChlorTank - T_ChemTankWall, H_ChlorTank, [0; 90]*deg)
ChlorOutletCut := CylinderF(ChlorOutlet_Origin + [0 m; -zc; 0 m], R_TankOutlet, 2*zc + T_ChemTankWall, [-90; 0]*deg)
ChlorDrainCut := CylinderF(ChlorineTank_Origin + [0 m; 0 m; zc], R_TankOutlet, 2*zc + T_ChemTankWall, [0; 270]*deg)
ChlorTankScript := stack(ChemChlorineTankLayer, ChlorOuterTankWall, ChemChlorineTankFrz, ChlorInnerTankWall, ChlorOutletCut, ChlorDrainCut, GroupDelete, SubtractFromChemChlorineTank)
ChemTankScript := stack(CoagTankScript, ChlorTankScript)
# mrf222 Spring 2016
# Plumbing origin points
L_ChemFirstPipe := 0.03 m
L_ChemSecondPipe := 0.05 m
L_BulkheadFittingEnd := 0.35*3/250*in
CoagOutlet_Origin[0] = -8.59302 m
L_BallValve := 450/250*in
ChlorOutlet_Origin[0] = -10.768 m
L_MaleInsertEnd := 3/4*3/250*in
ChlorMaleInsert_Origin := [ChlorOutlet_Origin[0]; ChlorOutlet_Origin[1] - L_BulkheadFittingEnd; ChlorOutlet_Origin[2]]
CoagMaleInsert_Origin := [CoagOutlet_Origin[0]; CoagOutlet_Origin[1] - L_BulkheadFittingEnd; CoagOutlet_Origin[2]]
FirstCoagPipe_Origin := [CoagMaleInsert_Origin[0]; CoagMaleInsert_Origin[1] - L_MaleInsertEnd; CoagMaleInsert_Origin[2]]
FirstChlorPipe_Origin := [ChlorMaleInsert_Origin[0]; ChlorMaleInsert_Origin[1] - L_MaleInsertEnd; ChlorMaleInsert_Origin[2]]
FirstCoagElbow_Origin := [FirstCoagPipe_Origin[0]; FirstCoagPipe_Origin[1] - L_ChemFirstPipe; FirstCoagPipe_Origin[2]]
FirstChlorElbow_Origin := [FirstChlorPipe_Origin[0]; FirstChlorPipe_Origin[1] - L_ChemFirstPipe; FirstChlorPipe_Origin[2]]
ChlorBallValve_Origin := [
    FirstChlorPipe_Origin[0] - ElbowRadius(ND_ChlorPipe) - L_ChemSecondPipe;
    FirstChlorElbow_Origin[1] - ElbowRadius(ND_ChlorPipe);
    FirstChlorPipe_Origin[2]
]
CoagBallValve_Origin := [
    FirstCoagElbow_Origin[0] - ElbowRadius(ND_CoagPipe) - L_ChemSecondPipe;
    FirstCoagElbow_Origin[1] - ElbowRadius(ND_CoagPipe);
    FirstCoagElbow_Origin[2]
]
CoagTee_Origin := [
    CoagTank_Origin[0] - R_CoagTank - S_ChemTankBorder/2;
    CoagBallValve_Origin[1];
    CoagBallValve_Origin[2] - ShortTeeLength(ND_CoagPipe)
]
ChlorTee_Origin := [
    ChlorineTank_Origin[0] - R_ChlorTank - S_ChemTankBorder/2;
    ChlorBallValve_Origin[1];
    ChlorBallValve_Origin[2] - ShortTeeLength(ND_ChlorPipe)
]
# Drainage and CalCol Connections
WhatDim := 50 cm
Coag1DrainElbow1_Origin := [
    ChemPlatform_Origin[0] + ChemPlatform_Dimensions[0] + T_PlantWall + OR(ND_CoagPipe);
    ChemPlatform_Origin[1] + ChemPlatform_Dimensions[1] - T_PlantWall - R_ChlorTank*2;
    CoagOutlet_Origin[2] - WhatDim - ElbowRadius(ND_CoagPipe)
]
Coag2DrainElbow1_Origin := [Coag1DrainElbow1_Origin[0]; Coag1DrainElbow1_Origin[1] - S_Fitting; Coag1DrainElbow1_Origin[2]]
Chlor1DrainElbow1_Origin := [
    Coag2DrainElbow1_Origin[0] - OR(ND_CoagPipe) + OR(ND_ChlorPipe);
    Coag2DrainElbow1_Origin[1] - S_Fitting;
    Coag2DrainElbow1_Origin[2]
]
Chlor2DrainElbow1_Origin := [Chlor1DrainElbow1_Origin[0]; Chlor1DrainElbow1_Origin[1] - S_Fitting; Chlor1DrainElbow1_Origin[2]]
CoagCCElbow1_Origin := [
    Coag1DrainElbow1_Origin[0];
    Coag1DrainElbow1_Origin[1];
    Coag1DrainElbow1_Origin[2] + 2*ElbowRadius(ND_CoagPipe) + S_Fitting
]
CoagCCElbow2_Origin := [
    Coag2DrainElbow1_Origin[0];
    Coag2DrainElbow1_Origin[1];
    Coag2DrainElbow1_Origin[2] + 2*ElbowRadius(ND_CoagPipe) + S_Fitting
]
ChlorCCElbow1_Origin := [
    Chlor1DrainElbow1_Origin[0];
    Chlor1DrainElbow1_Origin[1];
    Chlor1DrainElbow1_Origin[2] + 2*ElbowRadius(ND_ChlorPipe) + S_Fitting
]
ChlorCCElbow2_Origin := [
    Chlor2DrainElbow1_Origin[0];
    Chlor2DrainElbow1_Origin[1];
    Chlor2DrainElbow1_Origin[2] + 2*ElbowRadius(ND_ChlorPipe) + S_Fitting
]
CoagDrainValve1_Origin := [
    Coag1DrainElbow1_Origin[0];
    Coag1DrainElbow1_Origin[1];
    Coag1DrainElbow1_Origin[2] - 2*SocketDepth(ND_CoagPipe)
]
CoagDrainValve2_Origin := [
    Coag2DrainElbow1_Origin[0];
    Coag2DrainElbow1_Origin[1];
    Coag2DrainElbow1_Origin[2] - 2*SocketDepth(ND_CoagPipe) - S_Fitting
]
ChlorDrainValve1_Origin := [
    Chlor1DrainElbow1_Origin[0];
    Chlor1DrainElbow1_Origin[1];
    Chlor1DrainElbow1_Origin[2] - 2*SocketDepth(ND_ChlorPipe)
]
ChlorDrainValve2_Origin := [
    Chlor2DrainElbow1_Origin[0];
    Chlor2DrainElbow1_Origin[1];
    Chlor2DrainElbow1_Origin[2] - 2*SocketDepth(ND_ChlorPipe) - S_Fitting
]
# Inside the concrete...
Coag1DrainElbow2_Origin := [
    CoagOutlet_Origin[0];
    Coag1DrainElbow1_Origin[1] + ElbowRadius(ND_CoagPipe);
    Coag1DrainElbow1_Origin[2] + ElbowRadius(ND_CoagPipe)
]
Coag1DrainElbow2_Origin := [
    CoagOutlet_Origin[0];
    Coag1DrainElbow1_Origin[1] + ElbowRadius(ND_CoagPipe);
    Coag1DrainElbow1_Origin[2] + ElbowRadius(ND_CoagPipe)
]
Coag2DrainElbow2_Origin := [
    CoagOutlet_Origin[0] - R_CoagTank - S_ChemTankBorder/2;
    Coag2DrainElbow1_Origin[1] + ElbowRadius(ND_CoagPipe);
    Coag2DrainElbow1_Origin[2] + ElbowRadius(ND_CoagPipe)
]
Chlor1DrainElbow2_Origin := [
    ChlorOutlet_Origin[0];
    Chlor1DrainElbow1_Origin[1] + ElbowRadius(ND_ChlorPipe);
    Chlor1DrainElbow1_Origin[2] + ElbowRadius(ND_ChlorPipe)
]
Chlor2DrainElbow2_Origin := [
    ChlorOutlet_Origin[0] - R_ChlorTank - S_ChemTankBorder/2;
    Chlor2DrainElbow1_Origin[1] + ElbowRadius(ND_ChlorPipe);
    Chlor2DrainElbow1_Origin[2] + ElbowRadius(ND_ChlorPipe)
]
Coag1DrainElbow3_Origin := [
    Coag1DrainElbow2_Origin[0];
    CoagOutlet_Origin[1] - ElbowRadius(ND_CoagPipe);
    Coag1DrainElbow2_Origin[2]
]
Coag2DrainElbow3_Origin := [
    Coag2DrainElbow2_Origin[0];
    CoagOutlet_Origin[1] - ElbowRadius(ND_CoagPipe);
    Coag2DrainElbow2_Origin[2]
]
Chlor1DrainElbow3_Origin := [
    Chlor1DrainElbow2_Origin[0];
    ChlorOutlet_Origin[1] - ElbowRadius(ND_ChlorPipe);
    Chlor1DrainElbow2_Origin[2]
]
Chlor2DrainElbow3_Origin := [
    Chlor2DrainElbow2_Origin[0];
    ChlorOutlet_Origin[1] - ElbowRadius(ND_ChlorPipe);
    Chlor2DrainElbow2_Origin[2]
]
# Dosing Connection Fitting Origins
CoagCCElbow3_Origin := [
    CoagCCElbow1_Origin[0] - T_PlantWall - 2*OR(ND_ChlorPipe);
    CoagCCElbow1_Origin[1] + ElbowRadius(ND_CoagPipe);
    CoagCCElbow1_Origin[2] - ElbowRadius(ND_CoagPipe)
]
CoagCCElbow4_Origin := [
    CoagCCElbow2_Origin[0] - T_PlantWall - 2*OR(ND_ChlorPipe);
    CoagCCElbow2_Origin[1];
    CoagCCElbow2_Origin[2]
]
ChlorCCElbow3_Origin := [
    ChlorCCElbow1_Origin[0] - T_PlantWall - 2*OR(ND_ChlorPipe);
    ChlorCCElbow1_Origin[1];
    ChlorCCElbow1_Origin[2]
]
ChlorCCElbow4_Origin := [
    ChlorCCElbow2_Origin[0] - T_PlantWall - 2*OR(ND_ChlorPipe);
    ChlorCCElbow2_Origin[1];
    ChlorCCElbow2_Origin[2] - ElbowRadius(ND_ChlorPipe)
]
# Elbows to connect the outside pipes back up to the tees
CoagCCElbow5_Origin := [
    CoagCCElbow3_Origin[0];
    CoagCCElbow1_Origin[1] + 2*SocketDepth(ND_CoagPipe);
    CoagCCElbow1_Origin[2]
]
ChlorCCElbow5_Origin := [
    ChlorCCElbow4_Origin[0];
    ChlorCCElbow4_Origin[1] - 2*ElbowRadius(ND_ChlorPipe) - 2*SocketDepth(ND_ChlorPipe);
    ChlorCCElbow4_Origin[2] + ElbowRadius(ND_ChlorPipe)
]
CoagCCElbow6_Origin := [
    CoagCCElbow5_Origin[0];
    CoagCCElbow5_Origin[1] + ElbowRadius(ND_CoagPipe);
    CoagCCElbow1_Origin[2] + ElbowRadius(ND_CoagPipe) + 2*SocketDepth(ND_CoagPipe)
]
ChlorCCElbow6_Origin := [
    ChlorCCElbow5_Origin[0];
    ChlorCCElbow5_Origin[1];
    ChlorCCElbow1_Origin[2] + 2*SocketDepth(ND_ChlorPipe)
]
CoagCCTee1_Origin := [
    CoagCCElbow6_Origin[0];
    CoagCCElbow4_Origin[1] + ShortTeeLength(ND_CoagPipe);
    CoagCCElbow6_Origin[2] + ElbowRadius(ND_CoagPipe)
]
ChlorCCTee1_Origin := [
    ChlorCCElbow6_Origin[0];
    ChlorCCElbow4_Origin[1] + ShortTeeLength(ND_ChlorPipe);
    ChlorCCElbow6_Origin[2] + ElbowRadius(ND_ChlorPipe)
]
# Drain Pipe Connection Origins
CoagDrainPipe1_Origin := CoagDrainValve1_Origin
CoagDrainPipe2_Origin := CoagDrainValve2_Origin
ChlorDrainPipe1_Origin := ChlorDrainValve1_Origin
ChlorDrainPipe2_Origin := ChlorDrainValve2_Origin
CoagDrainPipe3_Origin := [
    Coag1DrainElbow2_Origin[0] + ElbowRadius(ND_CoagPipe);
    Coag1DrainElbow2_Origin[1] - ElbowRadius(ND_CoagPipe);
    Coag1DrainElbow2_Origin[2]
]
CoagDrainPipe4_Origin := [
    Coag2DrainElbow2_Origin[0] + ElbowRadius(ND_CoagPipe);
    Coag2DrainElbow2_Origin[1] - ElbowRadius(ND_CoagPipe);
    Coag2DrainElbow2_Origin[2]
]
ChlorDrainPipe3_Origin := [
    Chlor1DrainElbow2_Origin[0] + ElbowRadius(ND_CoagPipe);
    Chlor1DrainElbow2_Origin[1] - ElbowRadius(ND_ChlorPipe);
    Chlor1DrainElbow2_Origin[2]
]
ChlorDrainPipe4_Origin := [
    Chlor2DrainElbow2_Origin[0] + ElbowRadius(ND_CoagPipe);
    Chlor2DrainElbow2_Origin[1] - ElbowRadius(ND_ChlorPipe);
    Chlor2DrainElbow2_Origin[2]
]
CoagDrainPipe5_Origin := Coag1DrainElbow2_Origin
CoagDrainPipe6_Origin := Coag2DrainElbow2_Origin
ChlorDrainPipe5_Origin := Chlor1DrainElbow2_Origin
ChlorDrainPipe6_Origin := Chlor2DrainElbow2_Origin
CoagDrainPipe7_Origin := [
    Coag1DrainElbow3_Origin[0];
    Coag1DrainElbow3_Origin[1] + ElbowRadius(ND_CoagPipe);
    Coag1DrainElbow3_Origin[2] + ElbowRadius(ND_CoagPipe)
]
CoagDrainPipe8_Origin := [
    Coag2DrainElbow3_Origin[0];
    Coag2DrainElbow3_Origin[1] + ElbowRadius(ND_CoagPipe);
    Coag2DrainElbow3_Origin[2] + ElbowRadius(ND_CoagPipe)
]
ChlorDrainPipe7_Origin := [
    Chlor1DrainElbow3_Origin[0];
    Chlor1DrainElbow3_Origin[1] + ElbowRadius(ND_ChlorPipe);
    Chlor1DrainElbow3_Origin[2] + ElbowRadius(ND_ChlorPipe)
]
ChlorDrainPipe8_Origin := [
    Chlor2DrainElbow3_Origin[0];
    Chlor2DrainElbow3_Origin[1] + ElbowRadius(ND_ChlorPipe);
    Chlor2DrainElbow3_Origin[2] + ElbowRadius(ND_ChlorPipe)
]
# Dosing Connection Fitting Origins
CoagCCPipe1_Origin := [
    CoagCCElbow1_Origin[0] - ElbowRadius(ND_CoagPipe);
    CoagCCElbow1_Origin[1];
    CoagCCElbow1_Origin[2] - ElbowRadius(ND_CoagPipe)
]
CoagCCPipe2_Origin := [
    CoagCCElbow2_Origin[0] - ElbowRadius(ND_CoagPipe);
    CoagCCElbow2_Origin[1];
    CoagCCElbow2_Origin[2] - ElbowRadius(ND_CoagPipe)
]
ChlorCCPipe1_Origin := [
    ChlorCCElbow1_Origin[0] - ElbowRadius(ND_ChlorPipe);
    ChlorCCElbow1_Origin[1];
    ChlorCCElbow1_Origin[2] - ElbowRadius(ND_ChlorPipe)
]
ChlorCCPipe2_Origin := [
    ChlorCCElbow2_Origin[0] - ElbowRadius(ND_ChlorPipe);
    ChlorCCElbow2_Origin[1];
    ChlorCCElbow2_Origin[2] - ElbowRadius(ND_ChlorPipe)
]
# Coagulant tank plumbing
# Coagulant fittings
CoagBulkheadFitting := insertdwg("https://confluence.cornell.edu/download/attachments/173604905/BulkheadFittingScaled.dwg", CoagOutlet_Origin, 3/250, 3/250, 0 deg)
CoagMaleInsert := insertdwg("https://confluence.cornell.edu/download/attachments/173604905/MaleInsert.dwg", CoagMaleInsert_Origin, 3/250, 3/250, 0 deg)
CoagBallValve := insertdwg("https://confluence.cornell.edu/download/attachments/173604905/BallValve.dwg", CoagBallValve_Origin, 1/250, 1/250, 0 deg)
RotateBallValve := Rotate3DLast(CoagBallValve_Origin, "X", 270 deg)
RotateBallValve2 := Rotate3DLast(CoagBallValve_Origin, "Z", 90 deg)
CoagDrainBulkheadFitting := insertdwg("https://confluence.cornell.edu/download/attachments/173604905/BulkheadFittingScaled.dwg", CoagTank_Origin, 3/250, 3/250, 0 deg)
RotateBulkheadFitting := Rotate3DLast(CoagTank_Origin, "X", 90 deg)
CoagDrainMaleInsert := insertdwg("https://confluence.cornell.edu/download/attachments/173604905/MaleInsert.dwg", CoagTank_Origin + [0 m; 0 m; -L_BulkheadFittingEnd], 3/250, 3/250, 0 deg)
RotateMaleInsert := Rotate3DLast(CoagTank_Origin + [0 m; 0 m; -L_BulkheadFittingEnd], "X", 90 deg)
CoagFirstElbow := ElbowF(FirstCoagElbow_Origin, [0; 0; 180]*deg, ND_CoagPipe, SDR_13.5)
ChemCoagFittingScript := stack(ChemCoagFittingLayer, CoagBulkheadFitting, CoagMaleInsert, CoagBallValve, RotateBallValve, RotateBallValve2, CoagDrainBulkheadFitting, RotateBulkheadFitting, CoagDrainMaleInsert, RotateMaleInsert, CoagFirstElbow, ChemCoagFittingFrz)
# Coagulant pipes
FirstCoagTankPipe := PipeF(FirstCoagPipe_Origin, L_ChemFirstPipe, [90; 0]*deg, ND_CoagPipe, SDR_13.5)
SecondCoagPipe := PipeF(FirstCoagElbow_Origin + [-ElbowRadius(ND_CoagPipe); -ElbowRadius(ND_CoagPipe); 0 m], L_ChemSecondPipe, [0; 0]*deg, ND_CoagPipe, SDR_13.5)
ThirdCoagPipe := PipeF(CoagBallValve_Origin + [-L_BallValve; 0 m; 0 m], CoagBallValve_Origin[0] - CoagTee_Origin[0] - L_BallValve - TeeLength(ND_CoagPipe)/2, [0; 0]*deg, ND_CoagPipe, SDR_13.5)
ChemCoagPipeScript := stack(ChemCoagPipeLayer, FirstCoagTankPipe, SecondCoagPipe, ThirdCoagPipe, ChemCoagPipeFrz)
ChemCoagPlumbingScript := stack(ChemCoagFittingScript, ChemCoagPipeScript)
# Chlorine tank plumbing
# Chlorine fittings
ChlorBulkheadFitting := insertdwg("https://confluence.cornell.edu/download/attachments/173604905/BulkheadFittingScaled.dwg", ChlorOutlet_Origin, 3/250, 3/250, 0 deg)
ChlorMaleInsert := insertdwg("https://confluence.cornell.edu/download/attachments/173604905/MaleInsert.dwg", ChlorMaleInsert_Origin, 3/250, 3/250, 0 deg)
ChlorBallValve := insertdwg("https://confluence.cornell.edu/download/attachments/173604905/BallValve.dwg", ChlorBallValve_Origin, 1/250, 1/250, 0 deg)
RotateBallValve := Rotate3DLast(ChlorBallValve_Origin, "X", 270 deg)
RotateBallValve2 := Rotate3DLast(ChlorBallValve_Origin, "Z", 90 deg)
ChlorDrainBulkheadFitting := insertdwg("https://confluence.cornell.edu/download/attachments/173604905/BulkheadFittingScaled.dwg", ChlorineTank_Origin, 3/250, 3/250, 0 deg)
RotateBulkheadFitting := Rotate3DLast(ChlorineTank_Origin, "X", 90 deg)
ChlorDrainMaleInsert := insertdwg("https://confluence.cornell.edu/download/attachments/173604905/MaleInsert.dwg", ChlorineTank_Origin + [0 m; 0 m; -L_BulkheadFittingEnd], 3/250, 3/250, 0 deg)
RotateMaleInsert := Rotate3DLast(ChlorineTank_Origin + [0 m; 0 m; -L_BulkheadFittingEnd], "X", 90 deg)
ChlorFirstElbow := ElbowF(FirstChlorElbow_Origin, [0; 0; 180]*deg, ND_ChlorPipe, SDR_13.5)
ChemChlorFittingScript := stack(ChemChlorineFittingLayer, ChlorBulkheadFitting, ChlorMaleInsert, ChlorBallValve, RotateBallValve, RotateBallValve2, ChlorDrainBulkheadFitting, RotateBulkheadFitting, ChlorDrainMaleInsert, RotateMaleInsert, ChlorFirstElbow, ChemChlorineFittingFrz)
# Chlorine pipes
FirstChlorPipe := PipeF(FirstChlorPipe_Origin, L_ChemFirstPipe, [90; 0]*deg, ND_ChlorPipe, SDR_13.5)
SecondChlorPipe := PipeF(FirstChlorElbow_Origin + [-ElbowRadius(ND_ChlorPipe); -ElbowRadius(ND_ChlorPipe); 0 m], L_ChemSecondPipe, [0; 0]*deg, ND_ChlorPipe, SDR_13.5)
ThirdChlorPipe := PipeF(ChlorBallValve_Origin + [-L_BallValve; 0 m; 0 m], ChlorBallValve_Origin[0] - ChlorTee_Origin[0] - L_BallValve - TeeLength(ND_ChlorPipe)/2, [0; 0]*deg, ND_ChlorPipe, SDR_13.5)
ChemChlorPipeScript := stack(ChemChlorinePipeLayer, FirstChlorPipe, SecondChlorPipe, ThirdChlorPipe, ChemChlorinePipeFrz)
ChemChlorPlumbingScript := stack(ChemChlorFittingScript, ChemChlorPipeScript)
ThawCoagPieces := ThawMultiple(["ChemCoagTank"; "ChemCoagFittingPlu"; "ChemCoagPipePlu"])
MirrorCoagPieces := MirrorAll([CoagTank_Origin[0] - R_CoagTank - S_ChemTankBorder/2; CoagTank_Origin[1]], [CoagTank_Origin[0] - R_CoagTank - S_ChemTankBorder/2; CoagTank_Origin[1] + zc], "n")
FreezeCoagPieces := FreezeMultiple(["ChemCoagTank"; "ChemCoagFittingPlu"; "ChemCoagPipePlu"])
ThawChlorinePieces := ThawMultiple(["ChemChlorineTank"; "ChemChlorineFittingPlu"; "ChemChlorinePipePlu"])
MirrorChlorinePieces := MirrorAll([ChlorineTank_Origin[0] - R_ChlorTank - S_ChemTankBorder/2; ChlorineTank_Origin[1]], [ChlorineTank_Origin[0] - R_ChlorTank - S_ChemTankBorder/2; ChlorineTank_Origin[1] + zc], "n")
FreezeChlorinePieces := FreezeMultiple(["ChemChlorineTank"; "ChemChlorineFittingPlu"; "ChemChlorinePipePlu"])
ChemReflectScript := stack(ThawCoagPieces, MirrorCoagPieces, FreezeCoagPieces, ThawChlorinePieces, MirrorChlorinePieces, FreezeChlorinePieces)
ThawChemPieces := ThawMultiple(["ChemCoagTank"; "ChemCoagPipePlu"; "ChemCoagFittingPlu"; "ChemChlorineTank"; "ChemChlorineFittingPlu"; "ChemChlorinePipePlu"])
CoagDrainPlatformCut1 := CylinderF(CoagTank_Origin + [0 m; 0 m; -T_ChemTankWall - T_ChemSlab - zc], OR(3 in), T_ChemSlab + 2*zc, [0; 90]*deg)
CoagDrainPlatformCut2 := CylinderF(CoagTank_Origin + [-2*R_CoagTank - S_ChemTankBorder; 0 m; -T_ChemTankWall - T_ChemSlab - zc], OR(3 in), T_ChemSlab + 2*zc, [0; 90]*deg)
ChlorineDrainPlatformCut1 := CylinderF(ChlorineTank_Origin + [0 m; 0 m; -T_ChemTankWall - T_ChemSlab - zc], OR(3 in), T_ChemSlab + 2*zc, [0; 90]*deg)
ChlorineDrainPlatformCut2 := CylinderF(ChlorineTank_Origin + [-2*R_ChlorTank - S_ChemTankBorder; 0 m; -T_ChemTankWall - T_ChemSlab - zc], OR(3 in), T_ChemSlab + 2*zc, [0; 90]*deg)
CoagOutletPlatformCut := CylinderF([CoagTee_Origin[0]; CoagTee_Origin[1]; Z_ChemPlatform - T_ChemSlab - zc], OR(3 in), T_ChemSlab + 2*zc, [0; 90]*deg)
ChlorineOutletPlatformCut := CylinderF([ChlorTee_Origin[0]; ChlorTee_Origin[1]; Z_ChemPlatform - T_ChemSlab - zc], OR(3 in), T_ChemSlab + 2*zc, [0; 90]*deg)
ChemPlatformHoleScript := stack(CoagDrainPlatformCut1, CoagDrainPlatformCut2, ChlorineDrainPlatformCut1, ChlorineDrainPlatformCut2, CoagOutletPlatformCut, ChlorineOutletPlatformCut)
RotateChemPieces := Rotate_All(CoagTank_Origin, -90 deg)
SlideChemPiecesY := MoveAll(CoagTank_Origin, CoagTank_Origin + [0 m; -2*R_CoagTank - 4*R_ChlorTank - 3*S_ChemTankBorder; 0 m])
FreezeChemPieces := FreezeMultiple(["ChemCoagTank"; "ChemCoagPipePlu"; "ChemCoagFittingPlu"; "ChemChlorineTank"; "ChemChlorineFittingPlu"; "ChemChlorinePipePlu"])
ChemTankPositionScript :=
    stack(ChemPlatformHoleScript, ThawChemPieces, RotateChemPieces, SlideChemPiecesY, FreezeChemPieces, GroupDelete, SubtractFromOpChemPlatform) if L_ChemTanksTotal > W_ChemPlatform
    stack(ChemPlatformHoleScript, GroupDelete, SubtractFromOpChemPlatform) otherwise
ChemTanksReflectRotateScript := stack(ChemReflectScript, ChemTankPositionScript)
# Reflect the first coagulant and chlorine tanks and associated plumbing
# Un-mirrored plumbing to constant head tanks
# CASE 1: Tanks lined up on X axis
# mrf222 Spring 2016
# Draw the plumbing that connects the all the pieces and leads to the constant head tanks
L_Coag2CoagPipe := 0.5*(W_EtChemPlatform - (2*R_CoagTank + 2*T_ChemTankWall + 2*S_ChemTankBorder) - sqrt(2)*(R_CoagTank + T_ChemTankWall + L_BulkheadFittingEnd + L_MaleInsertEnd + L_FirstPipe + L_BallValve + L_SecondPipe + ElbowRadius(ND_CoagPiping)) - TeeLength(ND_CoagPiping) - 2*ElbowRadius(ND_CoagPiping))
L_CoagYCorrection := ThirdCoagPipe_Origin[1] - 3*ElbowRadius(ND_CoagPiping) - L_Coag2CoagPipe - 0.5*TeeLength(ND_CoagPiping) - (ChemWallHole_Origin[1] + 0.5*L_PlatformHole)
L_CoagXCorrection := ChemWallHole_Origin[0] + T_PlantWall + zc - (ThirdCoagPipe_Origin[0] + ShortTeeLength(ND_CoagPiping) + 2*ElbowRadius(ND_CoagPiping) + L_FirstPipe)
L_ChlorfirstXCorrection := R_FilterCoagTank + zc
L_ChlorsecondXCorrection := R_ChlorTank
L_ChlorfirstYCorrection := R_ChlorTank
L_FCfirstXCorrection := R_FilterCoagTank + zc
L_ChlorsecondYCorrection := R_ChlorTank + L_CoagYCorrection + 2*ElbowRadius(ND_CoagPiping) - 5*zc
L_ChlorthirdXCorrection := L_CoagXCorrection - 5*zc - 3*ElbowRadius(ND_CoagPiping)
L_FCYCorrection := L_CoagYCorrection + 5*zc
L_FCsecondXCorrection := 2*L_CoagXCorrection - 2*ElbowRadius(ND_CoagPiping)
LayerNewChemConnections := layer_new("ChemConnectionsPlu", green)
CoagElbow := ElbowF(ThirdCoagPipe_Origin - [0 m; 0 m; L_ThirdPipe1], [180; 270; 90]*deg, ND_CoagPiping, SDR_13.5)
CoagElbow2 := ElbowF([
    CoagTank_Origin[0] - sqrt(2)/2*(R_CoagTank + T_ChemTankWall + L_BulkheadFittingEnd + L_FirstPipe + L_BallValve + L_SecondPipe + ElbowRadius(ND_CoagPiping));
    CoagTank_Origin[1] - W_EtChemPlatform + 2*R_CoagTank + 2*T_ChemTankWall + 2*S_ChemTankBorder + sqrt(2)/2*(R_CoagTank + T_ChemTankWall + L_BulkheadFittingEnd + L_FirstPipe + L_BallValve + L_SecondPipe + ElbowRadius(ND_CoagPiping));
    ThirdCoagPipe_Origin[2] - L_ThirdPipe1
], [180; 90; 90]*deg, ND_CoagPiping, SDR_13.5)
ChlorElbow := ElbowF([
    ChlorineTank_Origin[0] - 2*R_ChlorTank - 2*T_ChemTankWall - S_ChemTankBorder;
    ThirdChlorPipe_Origin[1];
    ThirdChlorPipe_Origin[2] - L_ThirdPipe1
], [0; 270; 270]*deg, ND_CoagPiping, SDR_13.5)
ChlorTee := TeeF([
    ChlorineTank_Origin[0] + ShortTeeLength(ND_CoagPiping);
    ChlorineTank_Origin[1] + .5*(2*(S_ChemTankBorder + R_ChlorTank + T_ChemTankWall) - W_EtChemPlatform);
    ThirdChlorPipe_Origin[2] - L_ThirdPipe
], [90; 180; 0]*deg, ND_CoagPiping, SDR_13.5)
CoagTee := TeeF([
    ThirdCoagPipe_Origin[0] + ShortTeeLength(ND_CoagPiping);
    ThirdCoagPipe_Origin[1] - ElbowRadius(ND_CoagPiping) - L_Coag2CoagPipe - 0.5*TeeLength(ND_CoagPiping);
    ThirdCoagPipe_Origin[2] - L_ThirdPipe
], [90; 180; 0]*deg, ND_CoagPiping, SDR_13.5)
CoagElbow3 := ElbowF([
    ThirdCoagPipe_Origin[0] + ShortTeeLength(ND_CoagPiping) + L_FirstPipe + ElbowRadius(ND_CoagPiping);
    ThirdCoagPipe_Origin[1] - 2*ElbowRadius(ND_CoagPiping) - L_Coag2CoagPipe - 0.5*TeeLength(ND_CoagPiping);
    ThirdCoagPipe_Origin[2] - L_ThirdPipe
], [0; 0; 0]*deg, ND_CoagPiping, SDR_13.5)
CoagElbow4 := ElbowF([
    ThirdCoagPipe_Origin[0] + ShortTeeLength(ND_CoagPiping) + L_FirstPipe + ElbowRadius(ND_CoagPiping);
    ThirdCoagPipe_Origin[1] - 2*ElbowRadius(ND_CoagPiping) - L_Coag2CoagPipe - 0.5*TeeLength(ND_CoagPiping) - L_CoagYCorrection;
    ThirdCoagPipe_Origin[2] - L_ThirdPipe
], [0; 180; 180]*deg, ND_CoagPiping, SDR_13.5)
ChlorElbow2 := ElbowF([
    (ChlorineTank_Origin[0] + ShortTeeLength(ND_CoagPiping)) + L_ChlorfirstXCorrection + ElbowRadius(ND_CoagPiping);
    ChlorineTank_Origin[1] + .5*(2*(S_ChemTankBorder + R_ChlorTank + T_ChemTankWall) - W_EtChemPlatform) + ElbowRadius(ND_CoagPiping);
    ThirdChlorPipe_Origin[2] - L_ThirdPipe
], [180; 180; 0]*deg, ND_CoagPiping, SDR_13.5)
ChlorElbow3 := ElbowF([
    (ChlorineTank_Origin[0] + ShortTeeLength(ND_CoagPiping)) + L_ChlorfirstXCorrection + ElbowRadius(ND_CoagPiping);
    (ChlorineTank_Origin[1] + .5*(2*(S_ChemTankBorder + R_ChlorTank + T_ChemTankWall) - W_EtChemPlatform) + ElbowRadius(ND_CoagPiping)) + L_ChlorfirstYCorrection;
    ThirdChlorPipe_Origin[2] - L_ThirdPipe
], [0; 180; 0]*deg, ND_CoagPiping, SDR_13.5)
ChlorElbow4 := ElbowF([
    (ChlorineTank_Origin[0] + ShortTeeLength(ND_CoagPiping)) + L_ChlorfirstXCorrection + ElbowRadius(ND_CoagPiping) + ElbowRadius(ND_CoagPiping) + ElbowRadius(ND_CoagPiping) + L_ChlorsecondXCorrection;
    (ChlorineTank_Origin[1] + .5*(2*(S_ChemTankBorder + R_ChlorTank + T_ChemTankWall) - W_EtChemPlatform) + ElbowRadius(ND_CoagPiping)) + L_ChlorfirstYCorrection;
    ThirdChlorPipe_Origin[2] - L_ThirdPipe
], [0; 0; 0]*deg, ND_CoagPiping, SDR_13.5)
ChlorElbow5 := ElbowF([
    ((ChlorineTank_Origin[0] + ShortTeeLength(ND_CoagPiping)) + L_ChlorfirstXCorrection + ElbowRadius(ND_CoagPiping) + 2*ElbowRadius(ND_CoagPiping)) + L_ChlorsecondXCorrection;
    ((ChlorineTank_Origin[1] + .5*(2*(S_ChemTankBorder + R_ChlorTank + T_ChemTankWall) - W_EtChemPlatform) + ElbowRadius(ND_CoagPiping)) + L_ChlorfirstYCorrection) - L_ChlorsecondYCorrection;
    ThirdChlorPipe_Origin[2] - L_ThirdPipe
], [0; 180; 180]*deg, ND_CoagPiping, SDR_13.5)
Coag2CoagPipe1 := PipeF([
    ThirdCoagPipe_Origin[0];
    ThirdCoagPipe_Origin[1] - ElbowRadius(ND_CoagPiping);
    ThirdCoagPipe_Origin[2] - L_ThirdPipe
], L_Coag2CoagPipe, [90; 0]*deg, ND_CoagPiping, SDR_13.5)
Coag2CoagPipe2 := PipeF([
    ThirdCoagPipe_Origin[0];
    ThirdCoagPipe_Origin[1] - ElbowRadius(ND_CoagPiping) - L_Coag2CoagPipe - TeeLength(ND_CoagPiping);
    ThirdCoagPipe_Origin[2] - L_ThirdPipe
], L_Coag2CoagPipe, [90; 0]*deg, ND_CoagPiping, SDR_13.5)
CoagTeePipe := PipeF([
    ThirdCoagPipe_Origin[0] + ShortTeeLength(ND_CoagPiping);
    ThirdCoagPipe_Origin[1] - ElbowRadius(ND_CoagPiping) - L_Coag2CoagPipe - 0.5*TeeLength(ND_CoagPiping);
    ThirdCoagPipe_Origin[2] - L_ThirdPipe
], L_FirstPipe, [180; 0]*deg, ND_CoagPiping, SDR_13.5)
CoagYPipe := PipeF([
    ThirdCoagPipe_Origin[0] + ShortTeeLength(ND_CoagPiping) + L_FirstPipe + ElbowRadius(ND_CoagPiping);
    ThirdCoagPipe_Origin[1] - 2*ElbowRadius(ND_CoagPiping) - L_Coag2CoagPipe - 0.5*TeeLength(ND_CoagPiping);
    ThirdCoagPipe_Origin[2] - L_ThirdPipe
], L_CoagYCorrection, [90; 0]*deg, ND_CoagPiping, SDR_13.5)
CoagXPipe := PipeF([
    ThirdCoagPipe_Origin[0] + ShortTeeLength(ND_CoagPiping) + L_FirstPipe + 2*ElbowRadius(ND_CoagPiping);
    ThirdCoagPipe_Origin[1] - 3*ElbowRadius(ND_CoagPiping) - L_Coag2CoagPipe - 0.5*TeeLength(ND_CoagPiping) - L_CoagYCorrection;
    ThirdCoagPipe_Origin[2] - L_ThirdPipe
], L_CoagXCorrection, [180; 0]*deg, ND_CoagPiping, SDR_13.5)
ChlorfirstXPipe := PipeF([
    ChlorineTank_Origin[0] + ShortTeeLength(ND_CoagPiping);
    ChlorineTank_Origin[1] + .5*(2*(S_ChemTankBorder + R_ChlorTank + T_ChemTankWall) - W_EtChemPlatform);
    ThirdChlorPipe_Origin[2] - L_ThirdPipe
], L_ChlorfirstXCorrection, [180; 0]*deg, ND_CoagPiping, SDR_13.5)
ChlorsecondXPipe := PipeF([
    (ChlorineTank_Origin[0] + ShortTeeLength(ND_CoagPiping)) + L_ChlorfirstXCorrection + ElbowRadius(ND_CoagPiping) + ElbowRadius(ND_CoagPiping);
    (ChlorineTank_Origin[1] + .5*(2*(S_ChemTankBorder + R_ChlorTank + T_ChemTankWall) - W_EtChemPlatform) + ElbowRadius(ND_CoagPiping)) + L_ChlorfirstYCorrection + ElbowRadius(ND_CoagPiping);
    ThirdChlorPipe_Origin[2] - L_ThirdPipe
], L_ChlorsecondXCorrection, [180; 0]*deg, ND_CoagPiping, SDR_13.5)
ChlorfirstYPipe := PipeF([
    (ChlorineTank_Origin[0] + ShortTeeLength(ND_CoagPiping)) + L_ChlorfirstXCorrection + ElbowRadius(ND_CoagPiping);
    ChlorineTank_Origin[1] + .5*(2*(S_ChemTankBorder + R_ChlorTank + T_ChemTankWall) - W_EtChemPlatform) + ElbowRadius(ND_CoagPiping);
    ThirdChlorPipe_Origin[2] - L_ThirdPipe
], L_ChlorfirstYCorrection, [270; 0]*deg, ND_CoagPiping, SDR_13.5)
ChlorsecondYPipe := PipeF([
    ((ChlorineTank_Origin[0] + ShortTeeLength(ND_CoagPiping)) + L_ChlorfirstXCorrection + ElbowRadius(ND_CoagPiping) + 2*ElbowRadius(ND_CoagPiping)) + L_ChlorsecondXCorrection;
    (ChlorineTank_Origin[1] + .5*(2*(S_ChemTankBorder + R_ChlorTank + T_ChemTankWall) - W_EtChemPlatform) + ElbowRadius(ND_CoagPiping)) + L_ChlorfirstYCorrection;
    ThirdChlorPipe_Origin[2] - L_ThirdPipe
], L_ChlorsecondYCorrection, [90; 0]*deg, ND_CoagPiping, SDR_13.5)
ChlorthirdXPipe := PipeF([
    ((ChlorineTank_Origin[0] + ShortTeeLength(ND_CoagPiping)) + L_ChlorfirstXCorrection + ElbowRadius(ND_CoagPiping) + 2*ElbowRadius(ND_CoagPiping)) + L_ChlorsecondXCorrection + ElbowRadius(ND_CoagPiping);
    ((ChlorineTank_Origin[1] + .5*(2*(S_ChemTankBorder + R_ChlorTank + T_ChemTankWall) - W_EtChemPlatform) + ElbowRadius(ND_CoagPiping)) + L_ChlorfirstYCorrection) - L_ChlorsecondYCorrection - ElbowRadius(ND_CoagPiping);
    ThirdChlorPipe_Origin[2] - L_ThirdPipe
], L_ChlorthirdXCorrection, [180; 0]*deg, ND_CoagPiping, SDR_13.5)
ChemPiping := stack(LayerNewChemConnections, CoagElbow, CoagElbow2, CoagTee, ChlorTee, CoagElbow3, CoagElbow4, ChlorElbow2, ChlorElbow3, ChlorElbow4, ChlorElbow5, LayerChemConnFrz, LayerNewChemPiping, Coag2CoagPipe1, Coag2CoagPipe2, CoagTeePipe, CoagYPipe, CoagXPipe, ChlorfirstXPipe, ChlorfirstYPipe, ChlorsecondXPipe, ChlorsecondYPipe, ChlorthirdXPipe, LayerChemPipFrz)
# Draw the drainage plumbing | mrf222 Spring 2016
# Dosing Connection Fittings
CoagCCElbow1 := ElbowF(CoagCCElbow1_Origin, [0; 0; -90]*deg, ND_CoagPipe, SDR_13.5)
CoagCCElbow2 := ElbowF(CoagCCElbow2_Origin, [0; 0; -90]*deg, ND_CoagPipe, SDR_13.5)
ChlorCCElbow1 := ElbowF(ChlorCCElbow1_Origin, [0; 0; -90]*deg, ND_ChlorPipe, SDR_13.5)
ChlorCCElbow2 := ElbowF(ChlorCCElbow2_Origin, [0; 0; -90]*deg, ND_ChlorPipe, SDR_13.5)
CoagCCElbow3 := ElbowF(CoagCCElbow3_Origin, [180; 0; 0]*deg, ND_CoagPipe, SDR_13.5)
CoagCCElbow4 := ElbowF(CoagCCElbow4_Origin, [0; 180; -90]*deg, ND_CoagPipe, SDR_13.5)
ChlorCCElbow3 := ElbowF(ChlorCCElbow3_Origin, [0; 180; -90]*deg, ND_ChlorPipe, SDR_13.5)
ChlorCCElbow4 := ElbowF(ChlorCCElbow4_Origin, [90; 0; 0]*deg, ND_ChlorPipe, SDR_13.5)
CoagCCElbow5 := ElbowF(CoagCCElbow5_Origin, [0; 90; 90]*deg, ND_CoagPipe, SDR_13.5)
CoagCCElbow6 := ElbowF(CoagCCElbow6_Origin, [90; 90; 0]*deg, ND_CoagPipe, SDR_13.5)
ChlorCCElbow5 := ElbowF(ChlorCCElbow5_Origin, [90; 90; 180]*deg, ND_ChlorPipe, SDR_13.5)
ChlorCCElbow6 := ElbowF(ChlorCCElbow6_Origin, [90; -90; 180]*deg, ND_ChlorPipe, SDR_13.5)
CoagCCPipe1 := PipeF(CoagCCPipe1_Origin, CoagCCPipe1_Origin[0] - CoagCCElbow3_Origin[0] - ElbowRadius(ND_CoagPipe), [180; 0]*deg, ND_CoagPipe, SDR_13.5)
CoagCCPipe2 := PipeF(CoagCCPipe2_Origin, CoagCCPipe2_Origin[0] - CoagCCElbow4_Origin[0] - ElbowRadius(ND_CoagPipe), [180; 0]*deg, ND_CoagPipe, SDR_13.5)
ChlorCCPipe1 := PipeF(ChlorCCPipe1_Origin, ChlorCCPipe1_Origin[0] - ChlorCCElbow3_Origin[0] - ElbowRadius(ND_ChlorPipe), [180; 0]*deg, ND_ChlorPipe, SDR_13.5)
ChlorCCPipe2 := PipeF(ChlorCCPipe2_Origin, ChlorCCPipe2_Origin[0] - ChlorCCElbow4_Origin[0] - ElbowRadius(ND_ChlorPipe), [180; 0]*deg, ND_ChlorPipe, SDR_13.5)
CoagCCTee1 := TeeF(CoagCCTee1_Origin, [0; -90; 0]*deg, ND_CoagPipe, SDR_13.5)
ChlorCCTee1 := TeeF(ChlorCCTee1_Origin, [180; -90; 0]*deg, ND_ChlorPipe, SDR_13.5)
# Drainage Connections Fittings
Coag1DrainElbow1 := ElbowF(Coag1DrainElbow1_Origin, [0; 0; 90]*deg, ND_CoagPipe, SDR_13.5)
Coag2DrainElbow1 := ElbowF(Coag2DrainElbow1_Origin, [0; 0; 90]*deg, ND_CoagPipe, SDR_13.5)
Chlor1DrainElbow1 := ElbowF(Chlor1DrainElbow1_Origin, [0; 0; 90]*deg, ND_ChlorPipe, SDR_13.5)
Chlor2DrainElbow1 := ElbowF(Chlor2DrainElbow1_Origin, [0; 0; 90]*deg, ND_ChlorPipe, SDR_13.5)
CoagDrainPipe1 := PipeF(CoagDrainPipe1_Origin, Coag1DrainElbow1_Origin[2] - CoagDrainValve1_Origin[2], [0; 90]*deg, ND_CoagPipe, SDR_13.5)
CoagDrainPipe2 := PipeF(CoagDrainPipe2_Origin, Coag1DrainElbow2_Origin[2] - CoagDrainValve2_Origin[2], [0; 90]*deg, ND_CoagPipe, SDR_13.5)
ChlorDrainPipe1 := PipeF(ChlorDrainPipe1_Origin, Chlor1DrainElbow1_Origin[2] - ChlorDrainValve1_Origin[2], [0; 90]*deg, ND_ChlorPipe, SDR_13.5)
ChlorDrainPipe2 := PipeF(ChlorDrainPipe2_Origin, Chlor1DrainElbow2_Origin[2] - ChlorDrainValve2_Origin[2], [0; 90]*deg, ND_ChlorPipe, SDR_13.5)
Coag1DrainElbow2 := ElbowF(Coag1DrainElbow2_Origin, [180; 0; 0]*deg, ND_CoagPipe, SDR_13.5)
Coag2DrainElbow2 := ElbowF(Coag2DrainElbow2_Origin, [180; 0; 0]*deg, ND_CoagPipe, SDR_13.5)
Chlor1DrainElbow2 := ElbowF(Chlor1DrainElbow2_Origin, [180; 0; 0]*deg, ND_ChlorPipe, SDR_13.5)
Chlor2DrainElbow2 := ElbowF(Chlor2DrainElbow2_Origin, [180; 0; 0]*deg, ND_ChlorPipe, SDR_13.5)
CoagDrainPipe3 := PipeF(CoagDrainPipe3_Origin, Coag1DrainElbow1_Origin[0] - Coag1DrainElbow2_Origin[0] - 2*ElbowRadius(ND_CoagPipe), [180; 0]*deg, ND_CoagPipe, SDR_13.5)
CoagDrainPipe4 := PipeF(CoagDrainPipe4_Origin, Coag2DrainElbow1_Origin[0] - Coag2DrainElbow2_Origin[0] - 2*ElbowRadius(ND_CoagPipe), [180; 0]*deg, ND_CoagPipe, SDR_13.5)
ChlorDrainPipe3 := PipeF(ChlorDrainPipe3_Origin, Chlor1DrainElbow1_Origin[0] - Chlor1DrainElbow2_Origin[0] - 2*ElbowRadius(ND_ChlorPipe), [180; 0]*deg, ND_ChlorPipe, SDR_13.5)
ChlorDrainPipe4 := PipeF(ChlorDrainPipe4_Origin, Chlor2DrainElbow1_Origin[0] - Chlor2DrainElbow2_Origin[0] - 2*ElbowRadius(ND_ChlorPipe), [180; 0]*deg, ND_ChlorPipe, SDR_13.5)
Coag1DrainElbow3 := ElbowF(Coag1DrainElbow3_Origin, [-90; 90; 90]*deg, ND_CoagPipe, SDR_13.5)
Coag2DrainElbow3 := ElbowF(Coag2DrainElbow3_Origin, [-90; 90; 90]*deg, ND_CoagPipe, SDR_13.5)
Chlor1DrainElbow3 := ElbowF(Chlor1DrainElbow3_Origin, [-90; 90; 90]*deg, ND_CoagPipe, SDR_13.5)
Chlor2DrainElbow3 := ElbowF(Chlor2DrainElbow3_Origin, [-90; 90; 90]*deg, ND_CoagPipe, SDR_13.5)
CoagDrainPipe5 := PipeF(CoagDrainPipe5_Origin, Coag1DrainElbow3_Origin[1] - Coag1DrainElbow2_Origin[1] - ElbowRadius(ND_CoagPipe), [-90; 0]*deg, ND_CoagPipe, SDR_13.5)
CoagDrainPipe6 := PipeF(CoagDrainPipe6_Origin, Coag2DrainElbow3_Origin[1] - Coag2DrainElbow2_Origin[1] - ElbowRadius(ND_CoagPipe), [-90; 0]*deg, ND_CoagPipe, SDR_13.5)
ChlorDrainPipe5 := PipeF(ChlorDrainPipe5_Origin, Chlor1DrainElbow3_Origin[1] - Chlor1DrainElbow2_Origin[1] - ElbowRadius(ND_ChlorPipe), [-90; 0]*deg, ND_ChlorPipe, SDR_13.5)
ChlorDrainPipe6 := PipeF(ChlorDrainPipe6_Origin, Chlor2DrainElbow3_Origin[1] - Chlor2DrainElbow2_Origin[1] - ElbowRadius(ND_ChlorPipe), [-90; 0]*deg, ND_ChlorPipe, SDR_13.5)
CoagDrainPipe7 := PipeF(CoagDrainPipe7_Origin, CoagOutlet_Origin[2] - CoagDrainPipe7_Origin[2] - L_BulkheadFittingEnd, [0; 90]*deg, ND_CoagPipe, SDR_13.5)
CoagDrainPipe8 := PipeF(CoagDrainPipe8_Origin, CoagOutlet_Origin[2] - CoagDrainPipe8_Origin[2] - L_BulkheadFittingEnd, [0; 90]*deg, ND_CoagPipe, SDR_13.5)
ChlorDrainPipe7 := PipeF(ChlorDrainPipe7_Origin, ChlorOutlet_Origin[2] - ChlorDrainPipe7_Origin[2] - L_BulkheadFittingEnd, [0; 90]*deg, ND_ChlorPipe, SDR_13.5)
ChlorDrainPipe8 := PipeF(ChlorDrainPipe8_Origin, ChlorOutlet_Origin[2] - ChlorDrainPipe8_Origin[2] - L_BulkheadFittingEnd, [0; 90]*deg, ND_ChlorPipe, SDR_13.5)
CoagDrainBallValve := insertdwg("https://confluence.cornell.edu/download/attachments/173604905/BallValve.dwg", CoagTank_Origin + [
    L_CoagDrainXCorrection + L_ConnPipe - SocketDepth(ND_CoagPiping);
    -L_CoagDrainYCorrection;
    -L_BulkheadFittingEnd - L_MaleInsertEnd - L_DrainPipe - L_ZCorrection
], 1/250, 1/250, -90 deg)
RotateCoagBallValve := Rotate3DLast(CoagTank_Origin + [
    L_CoagDrainXCorrection + L_ConnPipe - SocketDepth(ND_CoagPiping);
    -L_CoagDrainYCorrection;
    -L_BulkheadFittingEnd - L_MaleInsertEnd - L_DrainPipe - L_ZCorrection
], "Y", 90 deg)
MirrorDrainPieces := MirrorAll([
    CoagTank_Origin[0] - (R_CoagTank + T_ChemTankWall) + zc;
    CoagTank_Origin[1] + R_CoagTank + T_ChemTankWall + S_ChemTankBorder - 0.5*W_EtChemPlatform
], [
    CoagTank_Origin[0] - (R_CoagTank + T_ChemTankWall) - zc;
    CoagTank_Origin[1] + R_CoagTank + T_ChemTankWall + S_ChemTankBorder - 0.5*W_EtChemPlatform
], "n")
ChemDrainFittings := stack(Coag1DrainElbow1, Coag2DrainElbow1, Chlor1DrainElbow1, Chlor2DrainElbow1, Coag1DrainElbow2, Coag2DrainElbow2, Chlor1DrainElbow2, Chlor2DrainElbow2, Coag1DrainElbow3, Coag2DrainElbow3, Chlor1DrainElbow3, Chlor2DrainElbow3)
ChemDrainPlu := stack(CoagDrainPipe1, CoagDrainPipe2, ChlorDrainPipe1, ChlorDrainPipe2, CoagDrainPipe3, CoagDrainPipe4, ChlorDrainPipe3, ChlorDrainPipe4, CoagDrainPipe5, CoagDrainPipe6, ChlorDrainPipe5, ChlorDrainPipe6, CoagDrainPipe7, CoagDrainPipe8, ChlorDrainPipe7, ChlorDrainPipe8)
ChemDrainPiping := stack(ChemDrainFittingLayer, ChemDrainFittings, ChemDrainFittingFrz, ChemDrainPipeLayer, ChemDrainPlu, ChemDrainPipeFrz)
ChemCCFittings := stack(CoagCCElbow1, CoagCCElbow2, CoagCCElbow3, CoagCCElbow4, ChlorCCElbow1, ChlorCCElbow2, ChlorCCElbow3, ChlorCCElbow4, ChlorCCElbow5, ChlorCCElbow6, CoagCCElbow5, CoagCCElbow6, CoagCCTee1, ChlorCCTee1)
ChemCCPlu := stack(CoagCCPipe1, CoagCCPipe2, ChlorCCPipe1, ChlorCCPipe2)
ChemToCCPiping := stack(ChemToCalColPipeLayer, SelectChemToCalColPipe, ChemCCPlu, ChemToCalColPipeFrz, ChemToCalColFittingLayer, SelectChemToCalColFitting, ChemCCFittings, ChemToCalColFittingFrz)
ChemConnectionPluStack := stack(ChemDrainPiping, ChemToCCPiping)
AC_ChemTanks := stack(ChemMasonryScript, ChemTankScript, ChemCoagPlumbingScript, ChemChlorPlumbingScript, ChemTanksReflectRotateScript)
# [component: inputs ChemConnectionPluStack]
