Q_Plant := 20*L/s
# [reference: ExpertInputs.xmcd]
# [reference: MathFunctions.xmcd]
# [reference: PipeDatabase.xmcd]
# [reference: MaterialsDatabase.xmcd]
# [reference: FluidsFunctions.xmcd]
# [reference: SedTankFunctions.xmcd]
# [reference: CdcFunctions.xmcd]
# [reference: LfomFunctions.xmcd]
# [reference: SedimentationTank.xmcd]
# [reference: Flocculator.xmcd]
# [reference: LFOM.xmcd]
# [reference: EntranceTank.xmcd]
# [reference: StackedRapidSandFilter.xmcd]
# [reference: LinearCdc.xmcd]
# [reference: ChemStorageTanks.xmcd]
# Chemical Stock Tanks
# Available Tank Dimensions
# Supplier Information:
# http://www.rotoplas.com/assets/files/industria/catalogo.pdf
# 5 gallon bucket
# Tank Diameter | Tank Height
# Tank Volume | http://www.mcmaster.com/#storage-buckets/=kd23oh
# 35 gallon drum
# http://www.jlmovingsupplies.com/c31/DIXIE-OPEN-CLOSED-HEAD-DRUMS-p36721.html
Vol_SupplierChemTank := [18.93 L; 113.56 L; 208.198 L; 450 L; 600 L; 750 L; 1100 L; 2500 L]
Dimensions_SupplierChemTank := [
    11.875 in, 17.75 in;
    20.75 in, 31.75 in;
    22.5 in, 33.5 in;
    0.85 m, 0.99 m;
    0.96 m, 1.10 m;
    1.10 m, 1.02 m;
    1.10 m, 1.39 m;
    1.55 m, 1.65 m
]
# Coagulant Stock Tank Calculations
C_CoagStockMax := 120*gm/L  # Check if this is gram per liter or miligram per liter
C_CoagDoseMax := 80*mg/L
Ti_CoagStock := 24 hr
Q_ChemStock(Q_Plant, C_DoseMax, C_StockMax) := Q_Plant*C_DoseMax/C_StockMax
Wt_CoagBag := 25 kg  # May be different depending on the brand used?
# Using array for now
# for numbag = 1
# for vol.coagTank >=Ti.CoagStock*Q.CoagStock
#
# CoagStock = numbag*Wt.CoagBag/Vol.coagTank
# if Coagstock = CoagStockMax, return Vol.coagTank
# if CoagStock > CoagStockMax
# Vol.coagTank = CoagStockMax/(numbag*Wt.coagBag)
# This variable is predefined in LinearCDC
Q_CoagStock = 8e-6 m^3/s
Q_CoagStock := Q_ChemStock(Q_Plant, C_CoagDoseMax, C_CoagStockMax) = 1.33333e-5 m^3/s
Vol_CoagStockTank(Ti_Stock, Q_ChemStock, C_StockMax, Wt_CoagBag, Vol_SupplierChemTank) :=
    i ← 1
    Vol_CoagTankMin ← CeilNearest(Ti_Stock*Q_ChemStock, Vol_SupplierChemTank)
    Vol ← CeilNearest(i*Wt_CoagBag/C_StockMax, Vol_SupplierChemTank)
    while Vol < Vol_CoagTankMin
        i ← i + 1
        Vol ← CeilNearest(i*Wt_CoagBag/C_StockMax, Vol_SupplierChemTank)
    Num_CoagBag ← i
    Vol_CoagTank ← Vol/L
    return [Vol_CoagTank; Num_CoagBag]
# for numbag = 1
# vol.coagTankMin = Ti.CoagStock*Q.Coagstock
#
# Vol.coagTank = CoagStockMax/(numbag*Wt.coagBag)
# if Vol.coagtank < vol.coagtankMin
# numbag += 1
# else if ceilNearest(Vol.coagtank, Volsupplier) = ceilNeares(vol.coagtankMin, Volsupplier)
# return ceilNeares(Vol.coagank, Volsupplie)
# If only outputing volume of stock tank, it is fine, but once I try to output both volume and number of bags the unit of Q.CoagStock is wrong
Vol_StockTank := Vol_CoagStockTank(Ti_CoagStock, Q_CoagStock, C_CoagStockMax, Wt_CoagBag, Vol_SupplierChemTank)
Vol_CoagTank := Vol_StockTank[0]*L = 2500 L
CeilNearest(Ti_CoagStock*Q_CoagStock, Vol_SupplierChemTank) = 2500 L
Num_CoagBag := Vol_StockTank[1] = 6
CeilNearest(1*Wt_CoagBag/C_CoagStockMax, Vol_SupplierChemTank) = 450 L
R_CoagTank := Dimensions_SupplierChemTank[:, 0][index(Vol_CoagTank, Vol_SupplierChemTank)]/2 = 0.775 m
H_CoagTank := Dimensions_SupplierChemTank[:, 1][index(Vol_CoagTank, Vol_SupplierChemTank)] = 1.65 m
Vol_CoagTank(Ti_Stock, Q_ChemStock, C_StockMax, Wt_CoagBag, Vol_SupplierChemTank) :=
    i ← 1
    Vol_CoagTankMin ← CeilNearest(Ti_Stock*Q_ChemStock, Vol_SupplierChemTank)
    Vol ← CeilNearest(i*Wt_CoagBag/C_StockMax, Vol_SupplierChemTank)
    i ← i + 1 if Vol < Vol_CoagTankMin
    break otherwise
    Vol_CoagTank ← Vol
Vol_CoagTank := CeilNearest(Ti_CoagStock*Q_CoagStock, Vol_SupplierChemTank) = 2500 L
# The vertical position of the coagulant tank must be high enough to provide enough hydraulic head to achieve the desired maximum chemical flow rate through the float valve orifice entering the constant head tank. This distance is given by H.CoagTankAboveHeadTank, and is added to the elevation of the water level in the constant head tank to find the elevation of the stock tank outlet.
#
# The elevation of the water level in the constant head tank is a height H.DoserAssembly above the top of the entrance tank wall. This height depends on the hardware used to mount the lever arm, which dictates the level of the end of the dosing tube at zero flow and therefore the CHT elevation. Here a conservative (large) estimate of this height should be used to ensure the system has sufficient hydraulic head.
#
# The actual bottom of the stock tank is a height B.StockOutlet below the outlet to provide space for solids to settle in the bottom of the tank.
#
# See the dimensioned diagram below.
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# Chlorine Stock Tank Calculations
Vol_ChlorineTank := CeilNearest(Ti_ChlorineStock*Q_ChlorineStock, Vol_SupplierChemTank) = 450 L
R_ChlorineTank := Dimensions_SupplierChemTank[:, 0][index(Vol_ChlorineTank, Vol_SupplierChemTank)]/2 = 0.425 m
H_ChlorineTank := Dimensions_SupplierChemTank[:, 1][index(Vol_ChlorineTank, Vol_SupplierChemTank)] = 0.99 m
# Filter Coagulant Stock Tank Calculations
Vol_FiCoagTank := CeilNearest(Ti_FilterCoagStock*Q_FiCoagStock, Vol_SupplierChemTank) = 18.93 L
H_FilterCoagTank := Dimensions_SupplierChemTank[:, 1][index(Vol_FiCoagTank, Vol_SupplierChemTank)]
R_FilterCoagTank := Dimensions_SupplierChemTank[:, 0][index(Vol_FiCoagTank, Vol_SupplierChemTank)]/2
# Chemical Platform Dimension Calculations
H_FilterCoagTank := H_ChlorineTank
# Defined to allow for mirroring of plumbing code to work even when filter coagulant tanks should be a size smaller (51 L/s to 54 L/s). Should be changed once the functions determining size of the chlorine tanks and the filter coagulant tanks are more properly defined; this will require the code for the plumbing from the two sets of tanks to be coded individually instead of the currently used mirror function.
R_FilterCoagTank := R_ChlorineTank
W_EtChemPlatform :=
    max(4*(R_CoagTank + T_ChemTankWall) + 3*S_ChemTankBorder, 4*(R_FilterCoagTank + T_ChemTankWall) + 2*S_ChemTankBorder + W_HumanMin, 4*(R_ChlorineTank + T_ChemTankWall) + 2*S_ChemTankBorder + W_HumanMin) if FilterCoag == 1
    max(4*(R_CoagTank + T_ChemTankWall) + 3*S_ChemTankBorder, 4*(R_ChlorineTank + T_ChemTankWall) + 2*S_ChemTankBorder + W_HumanMin) otherwise
L_EtChemPlatform :=
    (2*R_CoagTank + 2*R_ChlorineTank + 2*R_FilterCoagTank + 6*T_ChemTankWall + 4*S_ChemTankBorder) if FilterCoag == 1
    (2*R_CoagTank + 2*R_ChlorineTank + 4*T_ChemTankWall + 3*S_ChemTankBorder) otherwise
