Q_Plant := 5*L/s
HL_FlocMax := 40 cm
H_SedSlopesToFlocWeirMin := 25 cm
T_FlocSlab := 15 cm
T_SedWall := 15 cm
T_SedDividingWall := 15 cm
T_SedChannelWall := 15 cm
T_FlocWall := 15 cm
T_FlocDividingWall := 15 cm
T_FiWall := 25 cm
T_FiBoxWall := 15 cm
T_PlantWall := 15 cm
T_PlantFloor := 20 cm
T_ChemSlab := 15 cm
T_DrainChannelWall := 15 cm
C_CoagDoseMax := 40*mg/L
C_ChlorDoseAve := 1*mg/L
# Mathcad to AutoCAD translators:
# [reference: MtoATranslators.xmcd]
# The wrapped MtoA translator contains the functions that the user will want to access. These functions will draw pieces with full functionality - specifying the location, dimension, and orientation of the object. Also, it contains layer control and subtraction capabilities for grouped objects.
# [reference: MtoATranslatorsWrapped.xmcd]
# Plant design calculations:
# [reference: ExpertInputs_st587CHT.xmcd]
# [reference: MathFunctions.xmcd]
# [reference: PipeDatabase_st587.xmcd]
# [reference: MaterialsDatabase.xmcd]
# [reference: FluidsFunctions.xmcd]
# [reference: SedimentationTank.xmcd]
# [reference: LFOM.xmcd]
# [reference: FlocculatorEntranceTank.xmcd]
# [reference: StackedRapidSandFilter.xmcd]
# Linear Chemical Dose Controller
# Coagulant dose controller
# Coagulant viscosity
Nu_Alum(C_Alum) := (1 + 4.255*10^-6*(C_Alum/(kg/m^3))^2.289)*Nu_Water
Nu_PACl(C_PACl) := (1 + 2.383*10^-5*(C_PACl/(kg/m^3))^1.893)*Nu_Water
Nu_Coag(C_Coag, EN_Coag) :=
    Nu ← Nu_Alum(C_Coag) if EN_Coag == 0
    Nu ← Nu_PACl(C_Coag) if EN_Coag == 1
    return Nu
# Stock volume and concentration
Q_CoagMaxEst := Q_Plant*C_CoagDoseMax/C_CoagStockEst
Vol_CoagStock := CeilNearest(Ti_CoagStockMinEst*Q_CoagMaxEst, Vol_SupplierChemTank)
N_CoagSacks := round(Vol_CoagStock*C_CoagStockEst/M_CoagSack)
C_CoagStock := N_CoagSacks*M_CoagSack/Vol_CoagStock
Q_CoagMax := Q_Plant*C_CoagDoseMax/C_CoagStock
Ti_CoagStockMin := Vol_CoagStock/Q_CoagMax
Nu_CoagStock := Nu_Coag(C_CoagStock, EN_Coag)
# Small-diameter tube design
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Q_MaxCoagTube := π*ID_CoagTube^2/4*sqrt(2*Pi_LinearCdcError*HL_Cdc*g/K_CdcTube) = 3.50633e-6 m^3/s
N_CoagTubesActive := ceil(Q_CoagMax/Q_MaxCoagTube)
N_CoagTubes := N_CoagTubesActive + 1
# Add a reserve tube that can be switched on so that another tube can be removed and cleaned without interrupting operation (each tube has a ball valve on each end).
Q_CoagTubeMax := Q_CoagMax/N_CoagTubesActive
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L_CoagTube := (HL_Cdc*g*π*ID_CoagTube^4/Q_CoagTubeMax - K_CdcTube*8*Q_CoagTubeMax/π)/(128*Nu_CoagStock)
# Stock tank dimensions
R_CoagTank := D_ChemTankAvail[index(Vol_CoagStock, Vol_ChemTankAvail)]/2
H_CoagTank := H_ChemTankAvail[index(Vol_CoagStock, Vol_ChemTankAvail)]
# Chlorine dose controller
# Stock concentration and volume
C_ChlorDoseMax := 2*C_ChlorDoseAve
Q_ChlorAveEst := Q_Plant*C_ChlorDoseAve/C_ChlorStockEst1
Vol_ChlorStock := CeilNearest(Ti_ChlorStockAve*Q_ChlorAveEst, Vol_SupplierChemTank)
C_ChlorStockEst2 := Q_Plant*C_ChlorDoseAve/(Vol_ChlorStock/Ti_ChlorStockAve)
# Stock concentration that will drain the entire stock in 1 day given the average dose if the plant is running at capacity.
M_ChlorStock := Round(Vol_ChlorStock*C_ChlorStockEst2/P_Chlor, 1 lb)
C_ChlorStock := M_ChlorStock*P_Chlor/Vol_ChlorStock
Q_ChlorMax := Q_Plant*C_ChlorDoseMax/C_ChlorStock
Nu_ChlorStock := Nu_Water
# Small-diameter tubes
Q_MaxChlorTubeError := π*ID_ChlorTube^2/4*sqrt(2*Pi_LinearCdcError*HL_Cdc*g/K_CdcTube)
N_ChlorTubesActive := ceil(Q_ChlorMax/Q_MaxChlorTubeError)
N_ChlorTubes := N_ChlorTubesActive + 1
Q_ChlorTubeMax := Q_ChlorMax/N_ChlorTubesActive
# Better estimate for chlorine solution viscosity?
L_ChlorTube := (HL_Cdc*g*π*ID_ChlorTube^4/Q_ChlorTubeMax - K_CdcTube*8*Q_ChlorTubeMax/π)/(128*Nu_ChlorStock)
# Stock tank dimensions
R_ChlorTank := D_ChemTankAvail[index(Vol_ChlorStock, Vol_ChemTankAvail)]/2
H_ChlorTank := H_ChemTankAvail[index(Vol_ChlorStock, Vol_ChemTankAvail)]
# Coagulant CHT float valve
D_CoagFloatValveOrifice :=
    i ← 0
    while h_orifice(D_FltVlvOrificesAvail[i], Pi_VCOrifice, Q_CoagMax) ≥ H_CoagTankAboveHeadTank
        i ← i + 1
    return D_FltVlvOrificesAvail[i]
# based on this function, the orifice size is set to 0.093in which is the oorifice size for the 1/4"ID barbed float valve
D_CoagFloatValveOrifice = 0.093 in
# What determines the 1m?
3/8/(1/4) = 1.5
HL_CoagFloatValveOrifice := h_orifice(D_CoagFloatValveOrifice, Pi_VCOrifice, Q_CoagMax) = 1.85547 cm
L_TubeStockToCHEst := 1 m
K_CoagReducerBeforeHeadTank := 0.25
HL_CoagReducerBeforeHeadTank := h_e(Q_CoagMax, 1/4*in, K_CoagReducerBeforeHeadTank) = 0.00352572 cm
HL_CoagTubeStockToCHMax := H_CoagTankAboveHeadTank - HL_CoagFloatValveOrifice - HL_CoagReducerBeforeHeadTank = 28.141 cm
HL_CoagFloatValveOrifice = 1.85547 cm
D_CoagTubeStockToCHEst := (128*Nu_Water*L_TubeStockToCHEst*Q_CoagMax/(π*g*HL_CoagTubeStockToCHMax))^(1/4)
D_CoagTubeStockToCH := max(3/8*in, D_CoagTubeStockToCHEst)
# Use 3/8" tubing to connect the stock tank/calibration column to the constant head tank unless a larger tube is needed (which it probably never will be).
# Chlorine CHT float valve
D_ChlorFloatValveOrifice :=
    i ← 0
    while h_orifice(D_FltVlvOrificesAvail[i], Pi_VCOrifice, Q_ChlorMax) ≥ H_CoagTankAboveHeadTank
        i ← i + 1
    return D_FltVlvOrificesAvail[i]
HL_ChlorFloatValveOrifice := h_orifice(D_ChlorFloatValveOrifice, Pi_VCOrifice, Q_ChlorMax)
HL_ChlorTubeStockToCHMax := H_CoagTankAboveHeadTank - HL_ChlorFloatValveOrifice
D_ChlorTubeStockToCHEst := (128*Nu_Water*L_TubeStockToCHEst*Q_ChlorMax/(π*g*HL_ChlorTubeStockToCHMax))^(1/4)
D_ChlorTubeStockToCH := max(3/8*in, D_ChlorTubeStockToCHEst)
# Use 3/8" tubing to connect the stock tank/calibration column to the constant head tank unless a larger tube is needed (which it probably never will be).
# Calibration columns
H_CoagColumnScale := 50 cm
H_ChlorColumnScale := 50 cm
Ti_CoagColumnMinEst := 15 s
Ti_ChlorColumnMinEst := 15 s
ID_CoagColumnMin := 2*sqrt(Q_CoagMax*Ti_CoagColumnMinEst/(H_CoagColumnScale*π))
ID_ChlorColumnMin := 2*sqrt(Q_ChlorMax*Ti_ChlorColumnMinEst/(H_ChlorColumnScale*π))
ND_CoagColumn := ND_Min(ID_CoagColumnMin, Sch40)
ND_ChlorColumn := ND_Min(ID_ChlorColumnMin, Sch40)
ID_CoagColumn := ID(ND_CoagColumn, Sch40)
ID_ChlorColumn := ID(ND_ChlorColumn, Sch40)
Ti_CoagColumnMin := H_CoagColumnScale*π*IR(ND_CoagColumn, Sch40)^2/Q_CoagMax
Ti_ChlorColumnMin := H_ChlorColumnScale*π*IR(ND_ChlorColumn, Sch40)^2/Q_ChlorMax
# Lever Arm Scale
L_LeverArmTotal := 36 in
L_SliderEffective := 3.5 in  # Distance between the end of the slider and the pivot point of the freefall PVC tube.
L_LeverArmEffective := L_LeverArmTotal - L_SliderEffective
L_CdcFloatArm := L_LeverArmEffective/(1 + HL_CdcCoag/HL_Flowmeasure)  # error: This variable is undefined.
# To find the length of the side of the arm with the scale and the side of the arm with the float attached, solve two equations for two unknowns. One equation is similar triangles at maximum flow. The other is that the two sides of the bar must add up to the total.
L_CdcFloatArm =  # error: This variable is undefined.
L_CdcScaleArm := L_LeverArmTotal - L_CdcFloatArm  # error: This variable is undefined.
L_CdcScaleArm =  # error
