Q_Plant := 5*L/s
# [reference: ExpertInputs.xmcd]
# [reference: MathFunctions.xmcd]
# [reference: PipeDatabase_wng9.xmcd]
# [reference: MaterialsDatabase.xmcd]
# [reference: FluidsFunctions.xmcd]
# Low Flow Stacked Rapid Sand Filter
# Dimensions and Pipe Sizes
PS_FiDefault := SDR26
PS_FiMan := Sch40
N_FiInletPipes := 4
N_FiOutletPipes := 3
ND_FiPipe := 24 in
ND_FiManTrunkMin := 2 in
ND_BallValve := 3 in
ND_FiManBranchMin := 1 in
N_FiManBranch := floor((innerdiameter(ND_FiPipe, PS_FiDefault) - 3 cm)/(10 cm)) = 5
# needs to be altered to account for fitting within the filter body. currently subtracting 3 cm arbitrarily
ND_BedTester := 1/2*in
ND_BedTesterOuter := 1 in
H_FiCap := 3/8*in
H_Shimstock := 1.5 in = 3.81 cm
ND_FiAirRelValve := 1/2*in
H_Gasket := H_Shimstock + 2 cm = 5.81 cm
T_Gasket := 6 mm
A_Fi := π*innerdiameter(ND_FiPipe, PS_FiDefault)^2/4
L_FiBallValve := .1625 m
L_FiOuterBulkFitting := .0368 m
# Layer Thickness as Function of Trunk Diameter
# round up to the nearest cm to make construction easier
H_FiLayerF(ND_Trunk) := max(H_FiLayerMin, Ceil(outerdiameter(ND_Trunk) + S_FiTrunkMin, 1 cm), Ceil(OuterDiameterFittingPVC(ND_Trunk), 1 cm), Ceil(FerncoOuterDiameter(ND_Trunk), 1 cm))
H_FiBottomLayerF(ND_Trunk, ND_BwTrunk) := max(H_FiLayerMin, Ceil(outerradius(ND_Trunk) + outerradius(ND_BwTrunk) + S_FiTrunkMin, 1 cm), Ceil(ConRadius(ND_Trunk) + ConRadius(ND_BwTrunk), 1 cm), Ceil(FerncoOuterDiameter(ND_Trunk)/2 + FerncoOuterDiameter(ND_BwTrunk)/2, 1 cm))
# Flow Distribution Constraints: Ratio of Pressure Recovery to Clean Bed Head Loss
# There are three flow distribution problems in the filter design: distribution between the slots along a manifold branch, distribution between branches along a trunk, and distribution between filter layers. The first two are both addressed by making pressure recovery in the manifold (both trunks and branches) small relative to the short path head loss (head loss through the clean bed, since slot head loss in forward filtration is small). In backwash mode where there is no bed head loss, the pressure recovery in the manifold plumbing must be small relative to slot head loss.
#
# Head loss through the inlet and outlet plumbing differs for different layers both because the number of elbows varies and because the top and bottom inlets have 1/2 the flow of the middle two. Therefore good flow distribution between layers would be addressed by making head loss through the inlet and outlet plumbing small for all layers relative to clean bed head loss. We do not have an explicit constraint set for this, but the constraint on trunk diameter which gives good flow distribution within the manifolds seems to be sufficient to take care of it. As a check, see the analysis under the section "Path Head Loss Calculations and Flow Distribution Between Layers" below.
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Pi_FiManifoldQ := 0.85  # Ratio of long path flow to short path flow
Pi_FiManifoldHeadLoss := 1 - Pi_FiManifoldQ^2 = 0.2775
# Ratio of pressure recovery in the slotted pipes to the head loss through the clean bed (or through the slots in backwash mode)
# Even though the piezometric head profiles for the inlet and outlet manifolds on the middle layers may be parallel meaning that pressure recovery there need not be small for good distribution between sand bed flow paths, we still need pressure recovery to be small in the outlet manifolds in order to get good flow distribution in the top and bottom layers where the velocity in the manifolds is 1/2 and the pressure recovery 1/4 that of other layers (even smaller in the larger-diameter bottom manifold where velocity head is tiny).
# Number of Filters, Layer Thickness
H_FiLayer := H_FiLayerF(ND_FiManTrunkMin) = 20 cm
Q_FiMax := V_FiBw*A_Fi = 3.07027 L/s
N_Fi := ceil(Q_Plant/Q_FiMax) = 2
# We will have one filter up until the plant flow is the maximum for the filter pipe size, after which we will multiply the filter as needed
N_Fi := 2
# Flow Rate Calculations
Q_Fi := Q_Plant/N_Fi = 2.5 L/s  # The flow will be divided evenly between the N_Fi = 2 filters.
A_FiActive := A_Fi = 0.279115 m^2
Q_FiLayer := Q_Fi/N_FiLayer = 0.416667 L/s  # This is the flow rate through each filter layer
# Clean Bed Head Loss and Maximum Manifold Velocity, Backwash Trunk Diameter
# Filtration manifold maximum velocity
HL_FiCleanLayer := h_lKozeny(H_FiLayer, D_FiSand60, Q_FiLayer/A_Fi, ε_FiSand, Nu_Water) = 4.52899 cm
PR_FiManifoldMax := HL_FiCleanLayer*Pi_FiManifoldHeadLoss
V_FiManMaxPR := sqrt(2*g*PR_FiManifoldMax) = 0.496487 m/s
# this is the max velocity through a non-backwash manifold or slotted pipe to ensure low pressure recovery headloss in comparison to headloss through the filter bed
V_FiBranchMaxPR := V_FiManMaxPR
# Backwash manifold maximum velocity
HL_FiBwSlotForwardMax := 0.1*HL_FiCleanLayer  # We want forward filtration slot headloss to be at most 10% of sand bed headloss.
HL_FiBwSlotsEst := (N_FiLayer*ε_FiSand)^2*HL_FiBwSlotForwardMax
# Headloss through the slots during backwash is equal to the change in flow rate squared divided by the change in area squared, multiplied by the forward filtration slot headloss.
PR_FiBwManifoldMax := HL_FiBwSlotsEst*Pi_FiManifoldHeadLoss = 0.723914 cm
V_FiBwManMaxPR := sqrt(2*g*PR_FiBwManifoldMax) = 0.376807 m/s
V_FiBwBranchMaxPR := V_FiBwManMaxPR
# Backwash Manifold Design and Slot Area
# Superior Manifolds and Branches
A_FiTrunkMin := Q_Fi/3/V_FiManMaxPR  # min flow area for non-backwash trunk
# min flow rate for non-backwash branches
A_FiBranchMin := 1/3*Q_Fi/(2*N_FiManBranch*V_FiBranchMaxPR) = 0.000167846 m^2
# 1/3 is the division of flow through one manifold (top and bottom entrances only receive 1/2 flow)
# N.FiManBranch is the number of branches on a single side!
ND_FiManTrunk := max(NominalDiameter(CeilNearest(D_circle(A_FiTrunkMin), AvailPipeSizes(PS_Default)[:, 0]), PS_Default), ND_FiManTrunkMin) = 2 in
ND_FiManBranch := max(NominalDiameter(CeilNearest(D_circle(A_FiBranchMin), AvailPipeSizes(PS_FiBranch)[:, 0]), PS_FiBranch), ND_FiManBranchMin) = 1 in
# Backwash Manifold and Branches
A_FiBwTrunkMin := Q_Fi/V_FiBwManMaxPR
A_FiBwBranchMin := Q_Fi/(2*N_FiManBranch*V_FiBwBranchMaxPR)
ND_FiBwTrunk := max(NominalDiameter(CeilNearest(D_circle(A_FiBwTrunkMin), AvailPipeSizes(PS_Default)[:, 0]), PS_Default), ND_FiManTrunkMin) = 4 in
ND_FiBwBranch := max(NominalDiameter(CeilNearest(D_circle(A_FiBwBranchMin), AvailPipeSizes(PS_FiBranch)[:, 0]), PS_FiBranch), ND_FiManBranchMin) = 1.5 in
Q_FiBwManBranch := Q_Fi/(2*N_FiManBranch)
PR_FiBwManBranch := (Q_FiBwManBranch/A_circle(innerdiameter(ND_FiBwManBranch, PS_FiBranch)))^2/(2*g)
HL_FiBwSlot := (6*ε_FiSand)^2*HL_FiBwSlotForwardMax = 2.6087 cm
HL_FiBwSlot := PR_FiBwManBranch/Pi_FiManifoldHeadLoss  # disabled
A_FiBwManSlots := A_orifice(HL_FiBwSlot, Pi_VenaContractaOrifice, Q_Fi) = 0.00554769 m^2
A_FiManSlots := 2*A_FiBwManSlots
A_orifice(HL_FiBwSlotForwardMax, Pi_VenaContractaOrifice, Q_Fi) = 0.0133145 m^2
A_FiTopManSlots := A_FiBwManSlots
HL_FiBwSlotForward := h_orifice(D_circle(A_FiBwManSlots*ε_FiSand), Pi_VenaContractaOrifice, Q_FiLayer) = 0.00452899 m
# Headloss through slots in the middle two inlets
HL_FiSlot := (2*Q_FiLayer/(Pi_VenaContractaOrifice*A_FiManSlots*ε_FiSand))^2/(2*g) = 0.452899 cm
# Head Loss Constraint Check
# Check total Pressure Recovery is at most 0.278 times clean bed headloss in forward filtration
# Check total Pressure Recovery is at most 0.278 times backwash slot headloss in backwash mode
# Check slot headloss in the backwash manifold is at most 10% clean bed headloss
# Pressure Recovery Check
PR_FiManTrunk := (Q_Fi/3/A_circle(innerdiameter(ND_FiManTrunk, PS_FiDefault)))^2/(2*g) = 0.618491 cm
Pi_FiManHLActual := PR_FiManTrunk/HL_FiCleanLayer = 0.136563
PR_FiBwManTrunk := (Q_Fi/(innerdiameter(ND_FiBwTrunk, PS_FiDefault)^2*π/4))^2/(2*g) = 0.424945 cm
Pi_FiBwHLActual := PR_FiBwManTrunk/HL_FiBwSlot = 0.162895
PR_FiManBranch := (1/3*Q_Fi/(2*N_FiManBranch)/A_circle(innerdiameter(ND_FiManBranch, PS_FiBranch)))^2/(2*g) = 0.113886 cm
Pi_FiHLActual := PR_FiManBranch/HL_FiCleanLayer = 0.025146
HL_FiBwSlotForward := h_orifice(D_circle(A_FiBwManSlots*ε_FiSand), Pi_VenaContractaOrifice, Q_FiLayer)
HL_FiBwSlotForward/HL_FiCleanLayer = 10 %
# Entrance Box Air Elevator Spacing
S_FiEntranceBaffle := ((Q_Fi/T_ChannelWall)^2/g)^(1/3) = 3.04831 cm  # Space between the entrance box wall and the baffle
S_FiBaffleToBlock := ((Q_Fi/T_ChannelWall)^2/g)^(1/3) = 3.04831 cm
# Entrance and Exit Box Dimensions
ND_FiBypass := D_pipeschedule(Q_Train, PS_FiDefault, 20 cm, 0.5 m, Nu_Water, E_Pvc, K_PipeEnt + K_El90 + K_PipeExit)
ND_DistPipe := D_pipeschedule(Q_Train, PS_FiDefault, 1.5 m, 100 m, Nu_Water, E_Pvc, K_PipeEnt + 3*K_El90 + K_PipeExit)
ND_FiInletChannelDrain := D_pipeschedule(Q_Train, PS_FiDefault, 1.5 m, 0.5 m, Nu_Water, E_Pvc, K_PipeEnt + K_El90 + K_PipeExit)
ND_FiEntBoxDrain := D_pipeschedule(Q_Fi, PS_FiDefault, 1.5 m, 0.5 m, Nu_Water, E_Pvc, K_PipeEnt + K_El90 + K_PipeExit)
ND_FiExitBoxDrain := D_pipeschedule(Q_Fi, PS_FiDefault, 1.5 m, 0.5 m, Nu_Water, E_Pvc, K_PipeEnt + K_El90 + K_PipeExit)
ND_FiBypassDrain := D_pipeschedule(Q_Train, PS_FiDefault, 1.5 m, 0.5 m, Nu_Water, E_Pvc, K_PipeEnt + K_El90 + K_PipeExit)
L_FiEntBox := 2*ConRadius(ND_FiEntBoxDrain) + 14*ConRadius(ND_FiManTrunk) + 9*S_Fitting = 0.984988 m
L_FiExitBox := L_FiEntBox
W_FiEntBox := T_PlantWall + S_Fitting + S_FiEntranceBaffle + S_FiBaffleToBlock + 2*ConRadius(max(ND_FiEntBoxDrain, ND_FiManTrunk)) + 2*S_Fitting = 0.429229 m
W_FiExitBox := 2*ConRadius(max(ND_FiExitBoxDrain, ND_FiManTrunk, ND_DistPipe)) + 2*S_Fitting = 0.228587 m
L_FiDistBox := 2*ConRadius(max(ND_DistPipe, ND_FiBypassDrain)) + 2*S_Fitting = 0.228587 m
L_FiInletChannel := N_Fi*L_FiEntBox + (N_Fi - 1)*(L_FiDistBox + 2*T_PlantWall)
W_FiInletChannel := max(W_ChannelMin, 2*ConRadius(ND_FiInletChannelDrain) + 2*S_Fitting, 2*SocketDepth(ND_SedLaunder) + ElbowRadius(ND_SedLaunder) + ConRadius(ND_SedLaunder))
S_BoxWallToFiPipe := 30 cm
# Manifold Pipe Lengths
S_Cap(ND) := CapHeight(ND) - SocketDepth(ND)
L_FiManTrunk := sqrt(innerdiameter(ND_FiPipe, PS_FiDefault)^2 - (2*ConRadius(ND_FiManTrunk))^2) - S_Cap(ND_FiManTrunk) - T_Flange
# Assuming trunk will have a male adpater whose threading feeds through the filter wall.
L_FiManCapOffset := innerR(ND_FiPipe, PS_FiDefault) - ConRadius(ND_FiManBranch)/tan(asin(2*ConRadius(ND_FiManBranch)/innerdiameter(ND_FiPipe, PS_FiDefault))) = 0.0661276 cm
S_FiBranchFromWall := max(T_Flange + SocketDepth(ND_FiManTrunk), innerdiameter(ND_FiPipe, PS_FiDefault) - T_Flange - L_FiManTrunk + SocketDepth(ND_FiManTrunk)) + outerradius(ND_FiManBranch)
B_FiManBranch := 2*(innerR(ND_FiPipe, PS_FiDefault) - S_FiBranchFromWall)/(N_FiManBranch - 1) = 11.2684 cm
L_FiManBranch :=
    for i ∈ 0 .. N_FiManBranch - 1
        L[i] ←
            innerR(ND_FiPipe, PS_FiDefault)*sin(acos((innerR(ND_FiPipe, PS_FiDefault) - S_FiBranchFromWall - B_FiManBranch*i + ConRadius(ND_FiManBranch))/innerR(ND_FiPipe, PS_FiDefault))) - outerradius(ND_FiManTrunk) - S_Cap(ND_FiManBranch) if i < N_FiManBranch/2
            innerR(ND_FiPipe, PS_FiDefault) - innerR(ND_FiManTrunk, PS_FiBranch) - L_FiManCapOffset - S_Cap(ND_FiManBranch) if i + 0.5 == N_FiManBranch/2
            L[N_FiManBranch - 1 - i] otherwise
    L
L_FiManCouplingToFernco := SocketDepth(ND_FiManTrunk) + S_Fitting + FerncoCouplingLength(ND_FiManTrunk)/2
L_FiCheckValve := .1651 m
# Total Sand Depth, Filter Pipe Length, Head Loss
H_FiSand := N_FiLayer*H_FiLayer + outerradius(ND_FiManBranch) = 1.2167 m
H_FiSandActive := H_FiSand - outerradius(ND_FiManBranch) = 1.2 m
H_FiFluidizedBed := Pi_FiFluidized*H_FiSand = 1.58171 m
L_FiBodyPipe := H_FiFluidizedBed + H_FiFluidizedBedToSiphon + (ConRadius(ND_FiManTrunk) + S_Fitting/2) + (2*ConRadius(ND_FiBwTrunk) + S_Fitting/2) + 2*(H_Gasket - H_FiCap)
# Sand bed head loss during steady state backwash.
HL_FiBwSS := H_FiSand*(Rho_FiSand - Rho_H2O)*(1 - ε_FiSand)/Rho_H2O = 1.20453 m
# The backwash head loss is almost exactly equal  to the sand bed depth. Note that this ignores losses in the plumbing.
HL_FiDirty := 30 cm  # Mickey suggested this value based on lab experience. Don't know if this is the same for the low flow filter
HL_FiTerminal := HL_FiCleanLayer + HL_FiDirty = 34.529 cm
HL_FiBwInitiation := HL_FiBwSF + HL_FiBwSS = 1.40453 m
# How much does the filter bed over fluidize when the entrance box level lowers after backwash initiation?
H_FiFluidizedBedVariation := (HL_FiBwInitiation - HL_FiBwSS)*(W_FiEntBox*L_FiEntBox - 4*π*(outerradius(ND_FiManTrunk)^2 + outerradius(ND_FiEntBoxDrain)^2))/A_FiActive = 28.9512 cm
# Plumbing Head Loss
HL_FiBwInletManifold := 1/3*h_f(Q_Fi, innerD(ND_FiManTrunk, PS_Default), L_FiManTrunk, Nu_Water, E_Pvc) + h_e(Q_Fi/(2*N_FiManBranch), innerD(ND_FiManBranch, PS_FiBranch), K_PipeEnt) + 2/3*h_f(Q_Fi/(2*N_FiManBranch), innerD(ND_FiManBranch, PS_FiBranch), L_FiManBranch[0], Nu_Water, E_Pvc) + 1/3*h_f(Q_Fi/(2*N_FiManBranch), innerD(ND_FiManBranch, PS_FiBranch), L_FiManBranch[1], Nu_Water, E_Pvc) + HL_FiBwSlot = 3.86554 cm
HL_FiFwdInletManifold(Q_Layer) := 1/3*h_f(2*Q_Layer, innerD(ND_FiManTrunk, PS_Default), L_FiManTrunk, Nu_Water, E_Pvc) + h_e(Q_Layer/N_FiManBranch, innerD(ND_FiManBranch, PS_FiBranch), K_PipeEnt) + 2/3*h_f(Q_Layer/N_FiManBranch, innerD(ND_FiManBranch, PS_FiBranch), L_FiManBranch[0], Nu_Water, E_Pvc) + 1/3*h_f(Q_Layer/N_FiManBranch, innerD(ND_FiManBranch, PS_FiBranch), L_FiManBranch[1], Nu_Water, E_Pvc) + HL_FiSlot
HL_FiFwdBotTopInletManifold(Q_Layer) := 1/3*h_f(Q_Layer, innerD(ND_FiManTrunk, PS_Default), L_FiManTrunk, Nu_Water, E_Pvc) + h_e(Q_Layer/(2*N_FiManBranch), innerD(ND_FiManBranch, PS_FiBranch), K_PipeEnt) + 2/3*h_f(Q_Layer/(2*N_FiManBranch), innerD(ND_FiManBranch, PS_FiBranch), L_FiManBranch[0], Nu_Water, E_Pvc) + 1/3*h_f(Q_Layer/(2*N_FiManBranch), innerD(ND_FiManBranch, PS_FiBranch), L_FiManBranch[1], Nu_Water, E_Pvc) + HL_FiSlot
HL_FiFwdOutletManifold(Q_Layer) := 1/3*h_f(2*Q_Layer, innerD(ND_FiBwTrunk, PS_Default), L_FiManTrunk, Nu_Water, E_Pvc) + h_e(Q_Layer/N_FiManBranch, innerD(ND_FiManBranch, PS_FiBranch), K_PipeExit) + 2/3*h_f(Q_Layer/N_FiManBranch, innerD(ND_FiManBranch, PS_FiBranch), L_FiManBranch[0], Nu_Water, E_Pvc) + 1/3*h_f(Q_Layer/N_FiManBranch, innerD(ND_FiManBranch, PS_FiBranch), L_FiManBranch[1], Nu_Water, E_Pvc)
L_LongestPath := L_FiBodyPipe + S_BoxWallToFiPipe = 2.39158 m
HL_FiInletPlumbing1(Q_Layer) := h_l(Q_Layer, innerD(ND_FiManTrunk, PS_Default), L_LongestPath, K_PipeEnt + K_TeeFlowBr + K_El45, Nu_Water, E_Pvc) + HL_FiFwdBotTopInletManifold(Q_Layer)
HL_FiInletPlumbing2(Q_Layer) := h_l(2*Q_Layer, innerD(ND_FiManTrunk, PS_Default), L_LongestPath, K_PipeEnt + K_TeeFlowBr + 2*K_El45, Nu_Water, E_Pvc) + HL_FiFwdInletManifold(Q_Layer)
# These are numbered from the top of the filter bed down. The top and bottom inlets have half the flow rate (only serve the layers below and above, respectively). The bottom inlet has the diameter of the backwash trunk.
HL_FiInletPlumbing3(Q_Layer) := h_l(2*Q_Layer, innerD(ND_FiManTrunk, PS_Default), L_LongestPath, K_PipeEnt + K_TeeFlowBr + 2*K_El45, Nu_Water, E_Pvc) + HL_FiFwdInletManifold(Q_Layer)
HL_FiInletPlumbing4(Q_Layer) := h_l(Q_Layer, innerD(ND_FiManTrunk, PS_Default), L_LongestPath, K_PipeEnt + K_TeeFlowBr + K_El45, Nu_Water, E_Pvc) + HL_FiFwdBotTopInletManifold(Q_Layer)
HL_FiInletPlumbingMax(Q_1, Q_2, Q_3, Q_4) := max(HL_FiInletPlumbing1(Q_1), HL_FiInletPlumbing2(Q_2), HL_FiInletPlumbing3(Q_3), HL_FiInletPlumbing4(Q_4))
HL_FiInletPlumbingMin(Q_1, Q_2, Q_3, Q_4) := min(HL_FiInletPlumbing1(Q_1), HL_FiInletPlumbing2(Q_2), HL_FiInletPlumbing3(Q_3), HL_FiInletPlumbing4(Q_4))
HL_FiInletPlumbingAve(Q_1, Q_2, Q_3, Q_4) := (HL_FiInletPlumbing1(Q_1) + HL_FiInletPlumbing2(Q_2) + HL_FiInletPlumbing3(Q_3) + HL_FiInletPlumbing4(Q_4))/4
HL_FiBwInletPlumbing := h_l(Q_Fi, innerD(ND_FiManTrunk, PS_Default), L_LongestPath, K_PipeEnt + K_TeeFlowBr + K_El45, Nu_Water, E_Pvc) + HL_FiBwInletManifold = 25.6432 cm
HL_FiOutletPlumbing1(Q_Layer) := h_l(2*Q_Layer, innerD(ND_FiManTrunk, PS_Default), L_LongestPath, K_El45 + K_TeeFlowBr + K_PipeExit, Nu_Water, E_Pvc) + HL_FiFwdOutletManifold(Q_Layer)
HL_FiOutletPlumbing2(Q_Layer) := h_l(2*Q_Layer, innerD(ND_FiManTrunk, PS_Default), L_LongestPath, K_TeeFlowBr + K_PipeExit, Nu_Water, E_Pvc) + HL_FiFwdOutletManifold(Q_Layer)
HL_FiOutletPlumbing3(Q_Layer) := h_l(2*Q_Layer, innerD(ND_FiManTrunk, PS_Default), L_LongestPath, K_El45 + K_TeeFlowBr + K_PipeExit, Nu_Water, E_Pvc) + HL_FiFwdOutletManifold(Q_Layer)
HL_FiOutletPlumbingMax(Q_1, Q_3) := max(HL_FiOutletPlumbing1(Q_1), HL_FiOutletPlumbing2(Q_1), HL_FiOutletPlumbing3(Q_3))
HL_FiOutletPlumbingMin(Q_1, Q_3) := min(HL_FiOutletPlumbing1(Q_1), HL_FiOutletPlumbing2(Q_1), HL_FiOutletPlumbing3(Q_3))
HL_FiOutletPlumbingAve(Q_1, Q_3) := (HL_FiOutletPlumbing1(Q_1) + HL_FiOutletPlumbing2(Q_1) + HL_FiOutletPlumbing3(Q_3))/3
# Path Head Loss Calculations and Flow Distribution Between Layers
HL_FiCleanLyr(Q) := h_lKozeny(H_FiLayer, D_FiSand60, Q/A_FiActive, ε_FiSand, Nu_Water)
HL_FiPathClean1(Q_Path) := HL_FiInletPlumbing1(Q_Path) + HL_FiCleanLyr(Q_Path) + HL_FiOutletPlumbing1(Q_Path)
HL_FiPathClean2(Q_Path) := HL_FiInletPlumbing2(Q_Path) + HL_FiCleanLyr(Q_Path) + HL_FiOutletPlumbing1(Q_Path)
HL_FiPathClean3(Q_Path) := HL_FiInletPlumbing2(Q_Path) + HL_FiCleanLyr(Q_Path) + HL_FiOutletPlumbing2(Q_Path)
HL_FiPathClean4(Q_Path) := HL_FiInletPlumbing3(Q_Path) + HL_FiCleanLyr(Q_Path) + HL_FiOutletPlumbing2(Q_Path)
HL_FiPathClean5(Q_Path) := HL_FiInletPlumbing3(Q_Path) + HL_FiCleanLyr(Q_Path) + HL_FiOutletPlumbing3(Q_Path)
HL_FiPathClean6(Q_Path) := HL_FiInletPlumbing4(Q_Path) + HL_FiCleanLyr(Q_Path) + HL_FiOutletPlumbing3(Q_Path)
HL_FiPathCleanMax(Q_1, Q_2, Q_3, Q_4, Q_5, Q_6) := max(HL_FiPathClean1(Q_1), HL_FiPathClean2(Q_2), HL_FiPathClean3(Q_3), HL_FiPathClean4(Q_4), HL_FiPathClean5(Q_5), HL_FiPathClean6(Q_6))
HL_FiPathCleanMin(Q_1, Q_2, Q_3, Q_4, Q_5, Q_6) := min(HL_FiPathClean1(Q_1), HL_FiPathClean2(Q_2), HL_FiPathClean3(Q_3), HL_FiPathClean4(Q_4), HL_FiPathClean5(Q_5), HL_FiPathClean6(Q_6))
# In reality the flow will distribute itself such that all paths have the same head loss. We will treat the average of all of the calculated path head losses as the actual complete head loss accross all paths.
HL_FiPathCleanAve(Q_1, Q_2, Q_3, Q_4, Q_5, Q_6) := (HL_FiPathClean1(Q_1) + HL_FiPathClean2(Q_2) + HL_FiPathClean3(Q_3) + HL_FiPathClean4(Q_4) + HL_FiPathClean5(Q_5) + HL_FiPathClean6(Q_6))/6
Pi_QFiLayer(Q_1, Q_2, Q_3, Q_4, Q_5, Q_6) := sqrt(HL_FiPathCleanMin(Q_1, Q_2, Q_3, Q_4, Q_5, Q_6)/HL_FiPathCleanMax(Q_1, Q_2, Q_3, Q_4, Q_5, Q_6))
# This estimate is reasonable as long as the answer is close to 1
# Guess:
Q_1 := Q_FiLayer
Q_2 := Q_FiLayer
Q_3 := Q_FiLayer
Q_4 := Q_FiLayer
Q_5 := Q_FiLayer
Q_6 := Q_FiLayer
Given
HL_FiPathClean1(Q_1) == HL_FiPathClean2(Q_2)
HL_FiPathClean2(Q_2) == HL_FiPathClean3(Q_3)
Q_1 + Q_2 + Q_3 + Q_4 + Q_5 + Q_6 == Q_Fi
HL_FiPathClean3(Q_3) == HL_FiPathClean4(Q_4)
HL_FiPathClean4(Q_4) == HL_FiPathClean5(Q_5)
HL_FiPathClean5(Q_5) == HL_FiPathClean6(Q_6)
HL_FiPath(Q) := Find(Q_1, Q_2, Q_3, Q_4, Q_5, Q_6)
Q_FiPath := HL_FiPath(Q_Fi) = [0.461047; 0.391068; 0.397885; 0.397885; 0.391068; 0.461047] L/s
HL_FiPathClean1(Q_FiPath[0]) = 9.94516 cm
Q_FiLayer1 := Q_FiPath[0]
HL_FiPathClean2(Q_FiPath[1]) = 9.94516 cm
Q_FiLayer2 := Q_FiPath[1]
HL_FiPathClean3(Q_FiPath[2]) = 9.94516 cm
Q_FiLayer3 := Q_FiPath[2]
HL_FiCleanPath := HL_FiPathClean1(Q_FiPath[0])
HL_FiPathClean4(Q_FiPath[3]) = 9.94516 cm
Q_FiLayer4 := Q_FiPath[3]
HL_FiPathClean5(Q_FiPath[4]) = 9.94516 cm
Q_FiLayer5 := Q_FiPath[4]
HL_FiPathClean6(Q_FiPath[5]) = 9.94516 cm
Q_FiLayer6 := Q_FiPath[5]
# Slotted Pipe Design
L_FiManBranchAvail := 2*(sum(L_FiManBranch) - N_FiManBranch*(SocketDepth(ND_FiManBranch) + 2*L_FiManBranchExt)) = 49.2092 in
# This is the total length of branch manifold available on a trunk (i.e., the length available for slots on 2*N.FiManBranch)
L_FiBwManSlotTotal := A_FiBwManSlots/W_FiManSlots = 27.3016 m
L_FiManSlotTotal := A_FiManSlots/W_FiManSlots = 54.6032 m
L_FiTopManSlotTotal := A_FiTopManSlots/W_FiManSlots = 27.3016 m
# We select  B_FiManSlot := 1/16*in = 1.5875 mm  for the closest slot spacing, and N_FiSlotRows := 2  for best structural integrity of these pipes
# We select  B_FiBwTopManSlot := 1/8*in = 3.175 mm  for the closest slot spacing, and N_FiBwSlotRows := 2  for best structural integrity of these pipes
N_FiManSlotsPerBranch := floor((L_FiManBranch - 2*L_FiManBranchExt - SocketDepth(ND_FiManBranch))/B_FiManSlot) = [37; 98; 120; 98; 37]
N_FiBwTopManSlotsPerBranch := floor((L_FiManBranch - 2*L_FiManBranchExt - SocketDepth(ND_FiManBranch))/B_FiBwTopManSlot) = [18; 49; 60; 49; 18]
N_FiSlotsPerMan := 2*N_FiSlotRows*sum(N_FiManSlotsPerBranch) = 1560
N_FiBwTopSlotsPerMan := 2*N_FiBwSlotRows*sum(N_FiBwTopManSlotsPerBranch) = 776
L_FiManSlotCurvedInner := L_FiManSlotTotal/N_FiSlotsPerMan = 3.50021 cm  # Check against available circumference:
C_FiManBranchInner := π*innerdiameter(ND_FiManBranch, PS_FiBranch) = 8.37065 cm
L_FiBwTopManSlotCurvedInner := L_FiBwManSlotTotal/N_FiBwTopSlotsPerMan = 3.51825 cm
L_FiManSlotInner := 2*innerdiameter(ND_FiManBranch, PS_FiBranch)/2*sin(2*π*L_FiManSlotCurvedInner/C_FiManBranchInner/2) = 2.57686 cm
L_FiBwTopManSlotInner := 2*innerdiameter(ND_FiManBranch, PS_FiBranch)/2*sin(2*π*L_FiBwTopManSlotCurvedInner/C_FiManBranchInner/2) = 2.58139 cm
H_FiManCenterToSlot := sqrt((innerdiameter(ND_FiManBranch, PS_FiBranch)/2)^2 - (L_FiManSlotInner/2)^2) = 0.338796 cm
H_FiBwTopManCenterToSlot := sqrt((innerdiameter(ND_FiManBranch, PS_FiBranch)/2)^2 - (L_FiBwTopManSlotInner/2)^2) = 0.330064 cm
L_FiManSlotOuter := 2*sqrt(outerradius(ND_FiManBranch)^2 - H_FiManCenterToSlot^2) = 3.27065 cm
L_FiBwTopManSlotOuter := 2*sqrt(outerradius(ND_FiManBranch)^2 - H_FiBwTopManCenterToSlot^2) = 3.27422 cm
H_FiSlot := outerradius(ND_FiManBranch) - H_FiManCenterToSlot = 1.33125 cm
H_FiBwSlot := outerradius(ND_FiManBranch) - H_FiBwTopManCenterToSlot = 1.33999 cm
N_FiManBranchTotal := N_Fi*(N_FiLayer - 1)*N_FiManBranch = 50
N_FiBwTopManBranchTotal := 2*N_Fi*N_FiManBranch = 20
# SPECIFICATIONS:  we need  N_FiManBranchTotal = 50 pipes of diameter  ND_FiManBranch = 1 in  with slots of width  W_FiManSlots = 0.2032 mm,straight length L_FiManSlotOuter = 3.27065 cm, and a spacing of B_FiManSlot = 0.0625 in
# SPECIFICATIONS:  we need  N_FiBwTopManBranchTotal = 20 pipes of diameter  ND_FiManBranch = 1 in, with slots of width W_FiManSlots = 0.2032 mm, straight length L_FiBwTopManSlotOuter = 3.27422 cm  and a spacing of  B_FiBwTopManSlot = 0.125 in
P_FiManBranches := N_FiManBranchTotal*L_FiManBranch*(9*USD/(5 ft)) = [37.3843; 66.1819; 76.3197; 66.1819; 37.3843] USD
P_FiBwManBranches := N_FiBwTopManBranchTotal*L_FiManBranch*(12*USD/(5 ft)) = [19.9383; 35.297; 40.7038; 35.297; 19.9383] USD
Radius_Trunk := innerdiameter(ND_FiManTrunk, 2)/2 = 26.2509 mm
Chord_TrunkPerpendicular := outerdiameter(ND_FiManBranch) = 3.3401 cm
Chord_TrunkHorizontal := (Radius_Trunk*cos(asin(Chord_TrunkPerpendicular/2/Radius_Trunk))) = 2.02535 cm
L_SlotCut := floor(Chord_TrunkHorizontal*2/B_FiManSlot)*B_FiManSlot + W_FiManSlots = 39.8907 mm
# Siphon Design
L_FiSiphonEst := L_FiBodyPipe + 5*S_Fitting = 2.34158 m
K_FiSiphon := K_PipeEnt + K_TeeFlowBr + 2*K_El90 + K_PipeExit = 5.1  # Minor loss coefficients for flow through the siphon. The tee is treated as an extra elbow
# Siphon has to handle the entire flow into the filter plus drain the terminal head in Ti.FiBwInitiation.  This is approximately a "hole in a bucket problem" so the average flow rate is half the max flow (hence the factor of 2).  The HL sum corresponds to the height of water that needs to be drained. Use maximum head loss through the siphon for conservative estimate.
Q_FiSiphonInitiation := Q_Fi + 2*A_FiActive*(HL_FiBwSF + H_FiForwardNoSuckAir + HL_FiDirty + HL_FiBwInletPlumbing + HL_FiBwSS + HL_FiSiphonMax - H_FiSiphonNoSuckAir)/Ti_FiBwInitiationBod = 9.20176 L/s
HL_FiSiphonInitiationMax := HL_FiBwSF + H_FiForwardNoSuckAir + HL_FiDirty + HL_FiBwInletPlumbing + HL_FiBwSS + HL_FiSiphonMax - H_FiSiphonNoSuckAir = 2.16097 m
HL_FiSiphonPipe := h_l(Q_Fi, innerdiameter(ND_FiBwTrunk, PS_Default), L_FiSiphonEst, K_FiSiphon, Nu_Water, E_Pvc) = 2.41767 cm
HL_FiSiphonOutlet := Headloss_weir(Q_Fi, innerD(ND_FiBwTrunk, PS_Default)) = 5.47193 cm
HL_FiSiphonOrifice := h_orifice(innerdiameter(ND_FiBwTrunk, PS_Default), Pi_VenaContractaOrifice, Q_Fi) = 1.07066 cm
HL_FiBwTotalSS := HL_FiBwInletPlumbing + HL_FiBwSS + HL_FiSiphonOrifice + HL_FiSiphonPipe + HL_FiSiphonOutlet = 1.55057 m
Rho_FiFluidized := Rho_H2O*ε_FiSand*Pi_FiFluidized + Rho_FiSand*(1 - ε_FiSand)/Pi_FiFluidized = 1743.08 kg/m^3
# Elevations
HL_FiEntPipe := h_l(Q_Plant, innerdiameter(ND_SedLaunder, PS_Default), W_Sed/2 + T_PlantWall, K_El90 + K_PipeExit, Nu_Water, E_Pvc)  # (not used)
Z_FiEntWeir := Z_SedLaunder + outerradius(ND_SedLaunder)
HL_FiEntWeir := Headloss_weir(Q_Fi, L_FiEntBox) = 1.23024 cm
ZW_FiInletChannel := Z_FiEntWeir + HL_FiEntWeir
ZW_FiEntMax := Z_FiEntWeir - H_FiWeirFreefall
Z_FiInletDrain := ZW_FiEntMax
HL_FiOverflowWeir := Headloss_weir(Q_Fi, W_FiEntBox - S_Fitting) = 2.32457 cm
ZW_FiEntTerminal := ZW_FiEntMax - HL_FiOverflowWeir
Z_FiOverflowWeir := ZW_FiEntTerminal
ZW_FiEntCleanForward := ZW_FiEntTerminal - HL_FiDirty
H_FiExitWeir := 5 cm
HL_FiExitWeir := Headloss_weir(Q_Fi/N_Fi, W_FiExitBox) = 2.05221 cm
Z_FiEntTank := ZW_FiEntCleanForward - HL_FiCleanPath - HL_FiExitWeir - H_FiExitWeir
H_FiInletFreeboard := 5 cm
H_FiEntTank := ZW_FiInletChannel + H_FiInletFreeboard - Z_FiEntTank
Z_FiEntChannel := Z_FiEntTank
Z_FiExitTank := Z_FiEntTank
ZW_FiEntBwSS := Z_FiEntTank + H_FiBwNoSuckAir
Z_FiSiphonOutlet := ZW_FiEntBwSS - HL_FiBwTotalSS
Z_FiTop := Z_FiEntTank - ChkValveLength(ND_FiAirRelValve) - H_FiCap
Z_FiBwPipe := Z_FiTop - S_Fitting/2 - 2*ConRadius(ND_FiBwTrunk) - (H_Gasket - H_FiCap)
S_FiInlet4 := ConRadius(ND_FiManTrunk) + S_Fitting/2 + (H_Gasket - H_FiCap) = 0.107706 m
Z_FiBottom := Z_FiBwPipe - H_FiFluidizedBedToSiphon - H_FiFluidizedBed - S_FiInlet4
Z_FiInlet4 := Z_FiBottom + S_FiInlet4
Z_FiInlet3 := Z_FiInlet4 + 2*H_FiLayer
Z_FiOutlet3 := Z_FiInlet4 + H_FiLayer
Z_FiInlet2 := Z_FiInlet3 + 2*H_FiLayer
Z_FiOutlet2 := Z_FiOutlet3 + 2*H_FiLayer
Z_FiInlet1 := Z_FiInlet2 + 2*H_FiLayer
Z_FiOutlet1 := Z_FiOutlet2 + 2*H_FiLayer
# Main Plant Drain Channel
# To calculate the maximum possible flow through the drain channel, all tanks are assumed to be initially full and emptying in the same time
# Note that the tank heights are used instead of the water levels in the calculation of maximum flow to have a conservative design.
W_PlantDC := 1 m
Q_TankDrainMax := Q_pipeminor(innerdiameter(ND_EtDrain, PS_Default), H_Et, K_PipeEnt + K_PipeExit)*2 + Q_pipeminor(innerdiameter(ND_FlocValve, PS_Default), H_Floc, K_PipeEnt + K_PipeExit)*1 + Q_pipeminor(innerdiameter(ND_SedSludgePipe, PS_Default), HW_Sed, K_PipeEnt + K_PipeExit)*N_SedBays*N_SedTanks
Q_PlantDCMax := Q_TankDrainMax + N_Fi*(1 + N_Fi > 1)*Q_Fi = L/s
H_DrainChannelMax := 1 m
L_PlantDC := W_Sed + 4*T_PlantWall + L_Floc + W_Et + W_HumanMin + W_FiInletChannel + 2*T_SedWeir
ND_PlantDC := NominalDiameter(D_PipeTotal(Q_PlantDCMax, H_DrainChannelMax, L_PlantDC, Nu_Water, E_Concrete, K_PipeEnt + K_PipeExit), PS_Default)
ND_PlantSideDC := NominalDiameter(D_PipeTotal(N_Fi*(1 + N_Fi > 1)*Q_Fi, H_DrainChannelMax, L_PlantDC, Nu_Water, E_Concrete, K_PipeEnt + K_PipeExit), PS_Default)
Z_PlantDCBottom := Z_FiBottom - H_DrainChannelMax
