T_Acrylic := 1 cm
T_FiWeir := 5 cm
H_FiDistBarrier := H_FiExitWeir
# Low Flow Stacked Rapid Sand Filter
# adapted for a 24" ND filter pipe by Jon Christensen 3/23/15
# Origins
FiInletChannel_Origin := [Plant_Origin[0] - L_Sed; Plant_Origin[1] - T_PlantWall; Z_FiEntChannel]
FiEntBox_Origin := FiInletChannel_Origin + [0 m; -W_FiInletChannel - T_PlantWall; 0 m]
FiEntBoxDrain_Origin := FiEntBox_Origin + [
    S_Fitting + ConRadius(ND_FiEntBoxDrain);
    -(T_PlantWall + S_Fitting + S_FiEntranceBaffle + S_FiBaffleToBlock + ConRadius(max(ND_FiEntBoxDrain, ND_FiManTrunk)) + S_Fitting);
    0 m
]
FiInlet1_Origin := FiEntBox_Origin + [
    2*S_Fitting + 2*ConRadius(ND_FiEntBoxDrain) + ConRadius(ND_FiManTrunk);
    -(T_PlantWall + S_Fitting + S_FiEntranceBaffle + S_FiBaffleToBlock + ConRadius(max(ND_FiEntBoxDrain, ND_FiManTrunk)) + S_Fitting);
    0 m
]  # inlets and outlets numbered from top to bottom
FiInlet2_Origin := FiEntBox_Origin + [
    4*S_Fitting + 2*ConRadius(ND_FiEntBoxDrain) + 5*ConRadius(ND_FiManTrunk);
    -(T_PlantWall + S_Fitting + S_FiEntranceBaffle + S_FiBaffleToBlock + ConRadius(max(ND_FiEntBoxDrain, ND_FiManTrunk)) + S_Fitting);
    0 m
]
FiInlet3_Origin := FiEntBox_Origin + [
    6*S_Fitting + 2*ConRadius(ND_FiEntBoxDrain) + 9*ConRadius(ND_FiManTrunk);
    -(T_PlantWall + S_Fitting + S_FiEntranceBaffle + S_FiBaffleToBlock + ConRadius(max(ND_FiEntBoxDrain, ND_FiManTrunk)) + S_Fitting);
    0 m
]
FiInlet4_Origin := FiEntBox_Origin + [
    8*S_Fitting + 2*ConRadius(ND_FiEntBoxDrain) + 13*ConRadius(ND_FiManTrunk);
    -(T_PlantWall + S_Fitting + S_FiEntranceBaffle + S_FiBaffleToBlock + ConRadius(max(ND_FiEntBoxDrain, ND_FiManTrunk)) + S_Fitting);
    0 m
]
FiExitBox_Origin := FiEntBox_Origin + [0 m; -W_FiEntBox - T_PlantWall; 0 m]
FiExitBoxDrain_Origin := FiExitBox_Origin + [S_Fitting + ConRadius(ND_FiExitBoxDrain); -W_FiExitBox/2; 0 m]
FiOutlet1_Origin := FiExitBox_Origin + [3*S_Fitting + 2*ConRadius(ND_FiExitBoxDrain) + 3*ConRadius(ND_FiManTrunk); -W_FiExitBox/2; 0 m]
FiOutlet2_Origin := FiExitBox_Origin + [5*S_Fitting + 2*ConRadius(ND_FiExitBoxDrain) + 7*ConRadius(ND_FiManTrunk); -W_FiExitBox/2; 0 m]
FiOutlet3_Origin := FiExitBox_Origin + [7*S_Fitting + 2*ConRadius(ND_FiExitBoxDrain) + 11*ConRadius(ND_FiManTrunk); -W_FiExitBox/2; 0 m]
FiBypassBox_Origin := FiEntBox_Origin + [L_FiEntBox + T_PlantWall; 0 m; 0 m]
FiBypassDrain_Origin := FiBypassBox_Origin + [
    L_FiDistBox/2;
    -(S_FiEntranceBaffle + S_FiBaffleToBlock + ConRadius(max(ND_FiEntBoxDrain, ND_FiManTrunk)) + S_Fitting);
    0 m
]
FiDistBox_Origin := FiExitBox_Origin + [L_FiExitBox + T_PlantWall; 0 m; 0 m]
FiDistPipe_Origin := FiDistBox_Origin + [L_FiDistBox/2; -W_FiExitBox/2; 0 m]
FiBodyPipe_Origin := [
    FiExitBox_Origin[0] + 2*ConRadius(ND_FiExitBoxDrain) + 7*ConRadius(ND_FiManTrunk) + 5*S_Fitting;
    FiExitBox_Origin[1] - (W_FiExitBox + T_PlantWall + S_BoxWallToFiPipe + outerradius(ND_FiPipe));
    Z_FiBottom
]
PlantDC_Origin := [
    Plant_Origin[0] - L_Sed - 2*T_PlantWall - W_PlantDC/2;
    Plant_Origin[1] - 2*T_PlantWall - W_FiInletChannel - W_HumanMin;
    Z_PlantDCBottom
]
# Filter Concrete
LayerFiInletChannel := layer_new("FiInletChannelCon", grey)
DrawFiInletChannel := Tank(FiInletChannel_Origin, [L_FiInletChannel; W_FiInletChannel; H_FiEntTank], T_PlantWall)
RotFiInletChannel := Rotate3DLast(FiInletChannel_Origin, "z", 180 deg)
FreezeFiInletChannel := FreezeLayer("FiInletChannelCon")
FiInletChannelConScript := stack(LayerFiInletChannel, DrawFiInletChannel, RotFiInletChannel, FreezeFiInletChannel)
LayerSedInletCoupling := layer_new("FiInletCouplingPlu", green)
DrawSedInletCoupling := CouplingSUBF([
    Plant_Origin[0] + S_Fitting + ConRadius(ND_SedLaunder) - L_Sed;
    -SocketDepth(ND_SedLaunder);
    Z_SedLaunder
], [270; 0]*deg, ND_SedLaunder, PS_Default, ["FiInletChannelCon"])
FreezeSedInletCoupling := FreezeLayer("FiInletCouplingPlu")
SedInletCouplingScript := stack(LayerSedInletCoupling, DrawSedInletCoupling, FreezeSedInletCoupling)
LayerFiEntExitBox := layer_new("FiEntExitBoxCon", grey)
DrawFiEntBox := Tank(FiEntBox_Origin, [L_FiEntBox; W_FiEntBox; H_FiEntTank], T_PlantWall)
RotFiEntBox := Rotate3DLast(FiEntBox_Origin, "z", 180 deg)
FiEntranceBoxSlottedWeir := BoxF(FiEntBox_Origin, FiEntBox_Origin + [L_FiEntBox; -T_FiWeir; H_FiEntTank], [0; 0; 0]*deg)
DrawFiExitBox := Tank(FiExitBox_Origin, [L_FiExitBox; W_FiExitBox; H_FiEntTank], T_PlantWall)
RotFiExitBox := Rotate3DLast(FiExitBox_Origin, "z", 180 deg)
FreezeFiEntExitBox := FreezeLayer("FiEntExitBoxCon")
FiEntExitBoxConScript := stack(LayerFiEntExitBox, DrawFiEntBox, RotFiEntBox, FiEntranceBoxSlottedWeir, DrawFiExitBox, RotFiExitBox, Union_All, FreezeFiEntExitBox)
LayerFiAuxBox := layer_new("FiAuxBoxCon", grey)
DrawFiBypassBox := Tank(FiBypassBox_Origin, [L_FiDistBox; W_FiEntBox; H_FiEntTank], T_PlantWall)
RotFiBypassBox := Rotate3DLast(FiBypassBox_Origin, "z", 180 deg)
DrawFiDistBox := Tank(FiDistBox_Origin, [L_FiDistBox; W_FiExitBox; H_FiEntTank], T_PlantWall)
RotFiDistBox := Rotate3DLast(FiDistBox_Origin, "z", 180 deg)
FreezeFiAuxBox := FreezeLayer("FiAuxBoxCon")
FiAuxBoxConScript := stack(LayerFiAuxBox, DrawFiBypassBox, RotFiBypassBox, DrawFiDistBox, RotFiDistBox, Union_All, FreezeFiAuxBox)
FiConScript := stack(FiInletChannelConScript, SedInletCouplingScript, FiEntExitBoxConScript, FiAuxBoxConScript)
# Filter Body
LayerFiBody := layer_new("FiBodyPlu", blue3)
DrawFiBody := PipeF(FiBodyPipe_Origin, L_FiBodyPipe, [0; 90]*deg, ND_FiPipe, PS_FiDefault)
FreezeFiBody := FreezeLayer("FiBodyPlu")
FiBodyPipe := stack(LayerFiBody, DrawFiBody, FreezeFiBody)
LayerCaps := layer_new("FiCap", grey)
DrawTopCap := CylinderF(FiBodyPipe_Origin + [0 m; 0 m; L_FiBodyPipe], outerdiameter(ND_FiPipe)/2, H_FiCap, [0; 90]*deg)
DrawBotCap := CylinderF(FiBodyPipe_Origin + [0 m; 0 m; -H_FiCap], outerdiameter(ND_FiPipe)/2, H_FiCap, [0; 90]*deg)
FreezeCapLayer := FreezeLayer("FiCap")
FiBodyPipeCaps := stack(LayerCaps, DrawTopCap, DrawBotCap, FreezeCapLayer)
FiGasketLyr := layer_new("FiGasket", grey)
TopGasketOuter := CylinderF(FiBodyPipe_Origin + [0; 0; L_FiBodyPipe - H_Gasket + H_FiCap], 1/2*outerdiameter(ND_FiPipe) + T_Gasket/2, H_Gasket, [0; 90]*deg)
BotGasketOuter := CylinderF(FiBodyPipe_Origin + [0; 0; -H_FiCap], 1/2*outerdiameter(ND_FiPipe) + T_Gasket/2, H_Gasket, [0; 90]*deg)
FiGasketFrz := FreezeLayer("FiGasket")
GasketCut := CylinderF(FiBodyPipe_Origin + [0; 0; -H_FiCap], 1/2*outerdiameter(ND_FiPipe), L_FiBodyPipe + 2*H_FiCap, [0; 90]*deg)
SubtractGasket := SubtractF(["FiGasket"], "DeleteMe")
FiGasket := stack(FiGasketLyr, TopGasketOuter, BotGasketOuter, FiGasketFrz, GasketCut, GroupDelete, SubtractGasket)
FiAirRelValveLyr := layer_new("FiAirRelValve", green)
FiAirRelPipeDraw := PipeSUBF(FiBodyPipe_Origin + [0; 0; L_FiBodyPipe], H_FiCap + T_Gasket + SocketDepth(ND_FiAirRelValve), [0; 90]*deg, ND_FiAirRelValve, PS_FiDefault, ["FiCap"; "FiGasket"])
FiAirRelValveDraw := insertdwg("https://confluence.cornell.edu/download/attachments/173604905/PvcBallValve+Scaled.dwg", FiBodyPipe_Origin + [0; 0; L_FiBodyPipe + H_FiCap], ND_FiAirRelValve/(2 in), ND_FiAirRelValve/(2 in), 0 deg)
FiAirRelValveFrz := FreezeLayer("FiAirRelValve")
FiAirRelValve := stack(FiAirRelValveLyr, FiAirRelPipeDraw, FiAirRelValveDraw, FiAirRelValveFrz)
FiBody := stack(FiBodyPipe, FiBodyPipeCaps, FiGasket, FiAirRelValve)
# Inlet and Outlet Plumbing
# Piping
S_FiBodyPluElbow := outerradius(ND_FiPipe) + S_BoxWallToFiPipe
FiPluPipeLyr := layer_new("FiPipePlu", blue)
# Inlets
FiInlet1Pipe1 := PipeSUBF(FiInlet1_Origin + [0 m; 0 m; -(CouplingLength(ND_FiManTrunk) - SocketDepth(ND_FiManTrunk))], Z_FiEntTank - Z_FiInlet1 - (CouplingLength(ND_FiManTrunk) - SocketDepth(ND_FiManTrunk)) - TeeLength(ND_FiManTrunk)/2, [0; 270]*deg, ND_FiManTrunk, PS_FiDefault, ["FiEntBoxCon"])
S_FiBodyInlet1 := FiBodyPipe_Origin[0] - FiInlet1_Origin[0]
FiInlet1Pipe2 := PipeF([FiInlet1_Origin[0]; FiInlet1_Origin[1] - ShortTeeLength(ND_FiManTrunk); Z_FiInlet1], FiInlet1_Origin[1] - FiBodyPipe_Origin[1] - ShortTeeLength(ND_FiManTrunk) - ElbowRadius(ND_FiManTrunk) - S_FiBodyPluElbow, [90; 270]*deg, ND_FiManTrunk, PS_FiDefault)
FiInlet1Pipe3 := PipeF([
    FiInlet1_Origin[0] + ElbowRadius(ND_FiManTrunk);
    FiBodyPipe_Origin[1] + S_FiBodyPluElbow;
    Z_FiInlet1
], FiBodyPipe_Origin[0] - FiInlet1_Origin[0] - 2*ElbowRadius(ND_FiManTrunk), [180; 0]*deg, ND_FiManTrunk, PS_FiDefault)
FiInlet1Pipe4 := PipeF([
    FiBodyPipe_Origin[0];
    FiBodyPipe_Origin[1] + S_FiBodyPluElbow - ElbowRadius(ND_FiManTrunk);
    Z_FiInlet1
], S_BoxWallToFiPipe - (CouplingLength(ND_FiManTrunk) - SocketDepth(ND_FiManTrunk)) - ElbowRadius(ND_FiManTrunk), [90; 270]*deg, ND_FiManTrunk, PS_FiDefault)
FiInlet1PurgeStub := PipeF([FiInlet1_Origin[0]; FiInlet1_Origin[1]; Z_FiInlet1 - TeeLength(ND_FiManTrunk)/2], 2*SocketDepth(ND_FiManTrunk), [0; 270]*deg, ND_FiManTrunk, PS_FiDefault)
FiInlet2Pipe1 := PipeSUBF(FiInlet2_Origin + [0 m; 0 m; -(CouplingLength(ND_FiManTrunk) - SocketDepth(ND_FiManTrunk))], Z_FiEntTank - Z_FiInlet2 - (CouplingLength(ND_FiManTrunk) - SocketDepth(ND_FiManTrunk)) - TeeLength(ND_FiManTrunk)/2, [0; 270]*deg, ND_FiManTrunk, PS_FiDefault, ["FiEntBoxCon"])
S_FiBodyInlet2 := FiBodyPipe_Origin[0] - FiInlet2_Origin[0]
FiInlet2Pipe2 := PipeF([FiInlet2_Origin[0]; FiInlet2_Origin[1] - ShortTeeLength(ND_FiManTrunk); Z_FiInlet2], S_Fitting + T_PlantWall + W_FiExitBox, [90; 270]*deg, ND_FiManTrunk, PS_FiDefault)
FiInlet2Pipe3 := PipeF([
    FiInlet2_Origin[0] + ElbowRadius(ND_FiManTrunk)*tan(22.5 deg)/sqrt(2);
    FiInlet2_Origin[1] - ShortTeeLength(ND_FiManTrunk) - (S_Fitting + T_PlantWall + W_FiExitBox) - sqrt(2)/2*ElbowRadius(ND_FiManTrunk);
    Z_FiInlet2
], sqrt(2)*S_FiBodyInlet2 - 2*ElbowRadius(ND_FiManTrunk)*tan(22.5 deg), [135; 0]*deg, ND_FiManTrunk, PS_FiDefault)
FiInlet2Pipe4 := PipeF([
    FiBodyPipe_Origin[0];
    FiInlet2_Origin[1] - ShortTeeLength(ND_FiManTrunk) - (S_Fitting + T_PlantWall + W_FiExitBox) - S_FiBodyInlet2 - sqrt(2)/2*ElbowRadius(ND_FiManTrunk);
    Z_FiInlet2
], FiInlet2_Origin[1] - ShortTeeLength(ND_FiManTrunk) - (S_Fitting + T_PlantWall + W_FiExitBox) - S_FiBodyInlet2 - sqrt(2)/2*ElbowRadius(ND_FiManTrunk) - FiBodyPipe_Origin[1] - (CouplingLength(ND_FiManTrunk) - SocketDepth(ND_FiManTrunk)) - outerradius(ND_FiPipe), [90; 270]*deg, ND_FiManTrunk, PS_FiDefault)
FiInlet2PurgeStub := PipeF([FiInlet2_Origin[0]; FiInlet2_Origin[1]; Z_FiInlet2 - TeeLength(ND_FiManTrunk)/2], 2*SocketDepth(ND_FiManTrunk), [0; 270]*deg, ND_FiManTrunk, PS_FiDefault)
FiInlet3Pipe1 := PipeSUBF(FiInlet3_Origin + [0 m; 0 m; -(CouplingLength(ND_FiManTrunk) - SocketDepth(ND_FiManTrunk))], Z_FiEntTank - Z_FiInlet3 - (CouplingLength(ND_FiManTrunk) - SocketDepth(ND_FiManTrunk)) - TeeLength(ND_FiManTrunk)/2, [0; 270]*deg, ND_FiManTrunk, PS_FiDefault, ["FiEntBoxCon"])
S_FiBodyInlet3 := FiInlet3_Origin[0] - FiBodyPipe_Origin[0]
FiInlet3Pipe2 := PipeF([FiInlet3_Origin[0]; FiInlet3_Origin[1] - ShortTeeLength(ND_FiManTrunk); Z_FiInlet3], S_Fitting + T_PlantWall + W_FiExitBox, [90; 270]*deg, ND_FiManTrunk, PS_FiDefault)
FiInlet3Pipe3 := PipeF([
    FiInlet3_Origin[0] - ElbowRadius(ND_FiManTrunk)*tan(22.5 deg)/sqrt(2);
    FiInlet3_Origin[1] - ShortTeeLength(ND_FiManTrunk) - (S_Fitting + T_PlantWall + W_FiExitBox) - sqrt(2)/2*ElbowRadius(ND_FiManTrunk);
    Z_FiInlet3
], sqrt(2)*S_FiBodyInlet3 - 2*ElbowRadius(ND_FiManTrunk)*tan(22.5 deg), [45; 0]*deg, ND_FiManTrunk, PS_FiDefault)
FiInlet3Pipe4 := PipeF([
    FiBodyPipe_Origin[0];
    FiInlet3_Origin[1] - ShortTeeLength(ND_FiManTrunk) - (S_Fitting + T_PlantWall + W_FiExitBox) - S_FiBodyInlet3 - sqrt(2)/2*ElbowRadius(ND_FiManTrunk);
    Z_FiInlet3
], FiInlet3_Origin[1] - ShortTeeLength(ND_FiManTrunk) - (S_Fitting + T_PlantWall + W_FiExitBox) - S_FiBodyInlet2 - sqrt(2)/2*ElbowRadius(ND_FiManTrunk) - FiBodyPipe_Origin[1] - (CouplingLength(ND_FiManTrunk) - SocketDepth(ND_FiManTrunk)) - outerradius(ND_FiPipe), [90; 270]*deg, ND_FiManTrunk, PS_FiDefault)
FiInlet3PurgeStub := PipeF([FiInlet3_Origin[0]; FiInlet3_Origin[1]; Z_FiInlet3 - TeeLength(ND_FiManTrunk)/2], 2*SocketDepth(ND_FiManTrunk), [0; 270]*deg, ND_FiManTrunk, PS_FiDefault)
FiInlet4Pipe1 := PipeSUBF(FiInlet4_Origin + [0 m; 0 m; -(CouplingLength(ND_FiManTrunk) - SocketDepth(ND_FiManTrunk))], Z_FiEntTank - Z_FiInlet4 - (CouplingLength(ND_FiManTrunk) - SocketDepth(ND_FiManTrunk)) - TeeLength(ND_FiManTrunk)/2, [0; 270]*deg, ND_FiManTrunk, PS_FiDefault, ["FiEntBoxCon"])
S_FiBodyInlet4 := FiInlet4_Origin[0] - FiBodyPipe_Origin[0]
FiInlet4Pipe2 := PipeF([FiInlet4_Origin[0]; FiInlet4_Origin[1] - ShortTeeLength(ND_FiManTrunk); Z_FiInlet4], FiInlet4_Origin[1] - FiBodyPipe_Origin[1] - ShortTeeLength(ND_FiManTrunk) - ElbowRadius(ND_FiManTrunk) - S_FiBodyPluElbow, [90; 270]*deg, ND_FiManTrunk, PS_FiDefault)
FiInlet4Pipe3 := PipeF([
    FiInlet4_Origin[0] - ElbowRadius(ND_FiManTrunk);
    FiBodyPipe_Origin[1] + S_FiBodyPluElbow;
    Z_FiInlet4
], FiInlet4_Origin[0] - FiBodyPipe_Origin[0] - 2*ElbowRadius(ND_FiManTrunk), [0; 0]*deg, ND_FiManTrunk, PS_FiDefault)
FiInlet4Pipe4 := PipeF([
    FiBodyPipe_Origin[0];
    FiBodyPipe_Origin[1] + S_FiBodyPluElbow - ElbowRadius(ND_FiManTrunk);
    Z_FiInlet4
], S_BoxWallToFiPipe - (CouplingLength(ND_FiManTrunk) - SocketDepth(ND_FiManTrunk)) - ElbowRadius(ND_FiManTrunk), [90; 270]*deg, ND_FiManTrunk, PS_FiDefault)
FiInlet4PurgeStub := PipeF([FiInlet4_Origin[0]; FiInlet4_Origin[1]; Z_FiInlet4 - TeeLength(ND_FiManTrunk)/2], 2*SocketDepth(ND_FiManTrunk), [0; 270]*deg, ND_FiManTrunk, PS_FiDefault)
# Outlets
FiOutlet1Pipe1 := PipeSUBF(FiOutlet1_Origin + [0 m; 0 m; -(CouplingLength(ND_FiManTrunk) - SocketDepth(ND_FiManTrunk))], Z_FiEntTank - Z_FiOutlet1 - (CouplingLength(ND_FiManTrunk) - SocketDepth(ND_FiManTrunk)) - TeeLength(ND_FiManTrunk)/2, [0; 270]*deg, ND_FiManTrunk, PS_FiDefault, ["FiExitBoxCon"])
S_FiBodyOutlet1 := FiBodyPipe_Origin[0] - FiOutlet1_Origin[0]
FiOutlet1Pipe2 := PipeF([FiOutlet1_Origin[0]; FiOutlet1_Origin[1] - ShortTeeLength(ND_FiManTrunk); Z_FiOutlet1], FiOutlet1_Origin[1] - FiBodyPipe_Origin[1] - ShortTeeLength(ND_FiManTrunk) - ElbowRadius(ND_FiManTrunk) - S_FiBodyPluElbow, [90; 270]*deg, ND_FiManTrunk, PS_FiDefault)
FiOutlet1Pipe3 := PipeF([
    FiOutlet1_Origin[0] + ElbowRadius(ND_FiManTrunk);
    FiBodyPipe_Origin[1] + S_FiBodyPluElbow;
    Z_FiOutlet1
], FiBodyPipe_Origin[0] - FiOutlet1_Origin[0] - 2*ElbowRadius(ND_FiManTrunk), [180; 0]*deg, ND_FiManTrunk, PS_FiDefault)
FiOutlet1Pipe4 := PipeF([
    FiBodyPipe_Origin[0];
    FiBodyPipe_Origin[1] + S_FiBodyPluElbow - ElbowRadius(ND_FiManTrunk);
    Z_FiOutlet1
], S_BoxWallToFiPipe - (CouplingLength(ND_FiManTrunk) - SocketDepth(ND_FiManTrunk)) - ElbowRadius(ND_FiManTrunk), [90; 270]*deg, ND_FiManTrunk, PS_FiDefault)
FiOutlet1PurgeStub := PipeF([FiOutlet1_Origin[0]; FiOutlet1_Origin[1]; Z_FiOutlet1 - TeeLength(ND_FiManTrunk)/2], 2*SocketDepth(ND_FiManTrunk), [0; 270]*deg, ND_FiManTrunk, PS_FiDefault)
FiOutlet2Pipe1 := PipeSUBF(FiOutlet2_Origin + [0 m; 0 m; -(CouplingLength(ND_FiManTrunk) - SocketDepth(ND_FiManTrunk))], Z_FiEntTank - Z_FiOutlet2 - (CouplingLength(ND_FiManTrunk) - SocketDepth(ND_FiManTrunk)) - TeeLength(ND_FiManTrunk)/2, [0; 270]*deg, ND_FiManTrunk, PS_FiDefault, ["FiExitBoxCon"])
FiOutlet2Pipe2 := PipeF([FiOutlet2_Origin[0]; FiOutlet2_Origin[1] - ShortTeeLength(ND_FiManTrunk); Z_FiOutlet2], FiOutlet2_Origin[1] - FiBodyPipe_Origin[1] - ShortTeeLength(ND_FiManTrunk) - (CouplingLength(ND_FiManTrunk) - SocketDepth(ND_FiManTrunk)) - outerradius(ND_FiPipe), [90; 270]*deg, ND_FiManTrunk, PS_FiDefault)
FiOutlet2PurgeStub := PipeF([FiOutlet2_Origin[0]; FiOutlet2_Origin[1]; Z_FiOutlet2 - TeeLength(ND_FiManTrunk)/2], 2*SocketDepth(ND_FiManTrunk), [0; 270]*deg, ND_FiManTrunk, PS_FiDefault)
FiOutlet3Pipe1 := PipeSUBF(FiOutlet3_Origin + [0 m; 0 m; -(CouplingLength(ND_FiManTrunk) - SocketDepth(ND_FiManTrunk))], Z_FiEntTank - Z_FiOutlet3 - (CouplingLength(ND_FiManTrunk) - SocketDepth(ND_FiManTrunk)) - TeeLength(ND_FiManTrunk)/2, [0; 270]*deg, ND_FiManTrunk, PS_FiDefault, ["FiExitBoxCon"])
S_FiBodyOutlet3 := FiBodyPipe_Origin[0] - FiOutlet3_Origin[0]
FiOutlet3Pipe2 := PipeF([FiOutlet3_Origin[0]; FiOutlet3_Origin[1] - ShortTeeLength(ND_FiManTrunk); Z_FiOutlet3], FiOutlet3_Origin[1] - FiBodyPipe_Origin[1] - ShortTeeLength(ND_FiManTrunk) - ElbowRadius(ND_FiManTrunk) - S_FiBodyPluElbow, [90; 270]*deg, ND_FiManTrunk, PS_FiDefault)
FiOutlet3Pipe3 := PipeF([
    FiOutlet3_Origin[0] - ElbowRadius(ND_FiManTrunk);
    FiBodyPipe_Origin[1] + S_FiBodyPluElbow;
    Z_FiOutlet3
], FiOutlet3_Origin[0] - FiBodyPipe_Origin[0] - 2*ElbowRadius(ND_FiManTrunk), [0; 0]*deg, ND_FiManTrunk, PS_FiDefault)
FiOutlet3Pipe4 := PipeF([
    FiBodyPipe_Origin[0];
    FiBodyPipe_Origin[1] + S_FiBodyPluElbow - ElbowRadius(ND_FiManTrunk);
    Z_FiOutlet3
], S_BoxWallToFiPipe - (CouplingLength(ND_FiManTrunk) - SocketDepth(ND_FiManTrunk)) - ElbowRadius(ND_FiManTrunk), [90; 270]*deg, ND_FiManTrunk, PS_FiDefault)
FiOutlet3PurgeStub := PipeF([FiOutlet3_Origin[0]; FiOutlet3_Origin[1]; Z_FiOutlet3 - TeeLength(ND_FiManTrunk)/2], 2*SocketDepth(ND_FiManTrunk), [0; 270]*deg, ND_FiManTrunk, PS_FiDefault)
FiPluPipeFrz := FreezeLayer("FiPipePlu")
FiPluPipes := stack(FiPluPipeLyr, FiInlet1Pipe1, FiInlet1Pipe2, FiInlet1Pipe3, FiInlet1Pipe4, FiInlet1PurgeStub, FiInlet2Pipe1, FiInlet2Pipe2, FiInlet2Pipe3, FiInlet2Pipe4, FiInlet2PurgeStub, FiInlet3Pipe1, FiInlet3Pipe2, FiInlet3Pipe3, FiInlet3Pipe4, FiInlet3PurgeStub, FiInlet4Pipe1, FiInlet4Pipe2, FiInlet4Pipe3, FiInlet4Pipe4, FiInlet4PurgeStub, FiOutlet1Pipe1, FiOutlet1Pipe2, FiOutlet1Pipe3, FiOutlet1Pipe4, FiOutlet1PurgeStub, FiOutlet2Pipe1, FiOutlet2Pipe2, FiOutlet2PurgeStub, FiOutlet3Pipe1, FiOutlet3Pipe2, FiOutlet3Pipe3, FiOutlet3Pipe4, FiOutlet3PurgeStub, FiPluPipeFrz)
# Fittings
FiPluFittingsLyr := layer_new("FiFittingsPlu", green)
# Inlets
FiInlet1Coupling1 := CouplingSUBF(FiInlet1_Origin + [0 m; 0 m; -SocketDepth(ND_FiManTrunk)], [0; 270]*deg, ND_FiManTrunk, PS_FiDefault, ["FiEntBoxCon"])
FiInlet1Tee := TeeF([FiInlet1_Origin[0]; FiInlet1_Origin[1] - ShortTeeLength(ND_FiManTrunk); Z_FiInlet1], [90; 90; 90]*deg, ND_FiManTrunk, PS_FiDefault)
FiInlet1Elbow1 := ElbowF([
    FiInlet1_Origin[0];
    FiBodyPipe_Origin[1] + S_FiBodyPluElbow + ElbowRadius(ND_FiManTrunk);
    Z_FiInlet1
], [180; 0; 0]*deg, ND_FiManTrunk, PS_FiDefault)
FiInlet1Elbow2 := ElbowF([
    FiBodyPipe_Origin[0];
    FiBodyPipe_Origin[1] + S_FiBodyPluElbow - ElbowRadius(ND_FiManTrunk);
    Z_FiInlet1
], [0; 0; 0]*deg, ND_FiManTrunk, PS_FiDefault)
FiInlet1Coupling2 := CouplingF([
    FiBodyPipe_Origin[0];
    FiBodyPipe_Origin[1] + outerradius(ND_FiPipe) + SocketDepth(ND_FiManTrunk);
    Z_FiInlet1
], [270; 0]*deg, ND_FiManTrunk, PS_FiDefault)
FiInlet2Coupling1 := CouplingSUBF(FiInlet2_Origin + [0 m; 0 m; -SocketDepth(ND_FiManTrunk)], [0; 270]*deg, ND_FiManTrunk, PS_FiDefault, ["FiEntBoxCon"])
FiInlet2Tee := TeeF([FiInlet2_Origin[0]; FiInlet2_Origin[1] - ShortTeeLength(ND_FiManTrunk); Z_FiInlet2], [90; 90; 90]*deg, ND_FiManTrunk, PS_FiDefault)
FiInlet2Elbow1 := Elbow45F([
    FiInlet2_Origin[0];
    FiInlet2_Origin[1] - ShortTeeLength(ND_FiManTrunk) - (S_Fitting + T_PlantWall + W_FiExitBox);
    Z_FiInlet2
], [180; 0; 0]*deg, ND_FiManTrunk, PS_FiDefault)
FiInlet2Elbow2 := Elbow45F([
    FiBodyPipe_Origin[0];
    FiInlet2_Origin[1] - ShortTeeLength(ND_FiManTrunk) - (S_Fitting + T_PlantWall + W_FiExitBox) - S_FiBodyInlet2 - sqrt(2)/2*ElbowRadius(ND_FiManTrunk);
    Z_FiInlet2
], [0; 0; 0]*deg, ND_FiManTrunk, PS_FiDefault)
FiInlet2Coupling2 := CouplingF([
    FiBodyPipe_Origin[0];
    FiBodyPipe_Origin[1] + outerradius(ND_FiPipe) + (CouplingLength(ND_FiManTrunk) - SocketDepth(ND_FiManTrunk));
    Z_FiInlet2
], [90; 0]*deg, ND_FiManTrunk, PS_FiDefault)
FiInlet3Coupling1 := CouplingSUBF(FiInlet3_Origin + [0 m; 0 m; -SocketDepth(ND_FiManTrunk)], [0; 270]*deg, ND_FiManTrunk, PS_FiDefault, ["FiEntBoxCon"])
FiInlet3Tee := TeeF([FiInlet3_Origin[0]; FiInlet3_Origin[1] - ShortTeeLength(ND_FiManTrunk); Z_FiInlet3], [90; 90; 90]*deg, ND_FiManTrunk, PS_FiDefault)
FiInlet3Elbow1 := Elbow45F([
    FiInlet3_Origin[0];
    FiInlet3_Origin[1] - ShortTeeLength(ND_FiManTrunk) - (S_Fitting + T_PlantWall + W_FiExitBox);
    Z_FiInlet3
], [180; 180; 0]*deg, ND_FiManTrunk, PS_FiDefault)
FiInlet3Elbow2 := Elbow45F([
    FiBodyPipe_Origin[0];
    FiInlet3_Origin[1] - ShortTeeLength(ND_FiManTrunk) - (S_Fitting + T_PlantWall + W_FiExitBox) - S_FiBodyInlet3 - sqrt(2)/2*ElbowRadius(ND_FiManTrunk);
    Z_FiInlet3
], [0; 180; 0]*deg, ND_FiManTrunk, PS_FiDefault)
FiInlet3Coupling2 := CouplingF([
    FiBodyPipe_Origin[0];
    FiBodyPipe_Origin[1] + outerradius(ND_FiPipe) + (CouplingLength(ND_FiManTrunk) - SocketDepth(ND_FiManTrunk));
    Z_FiInlet3
], [90; 0]*deg, ND_FiManTrunk, PS_FiDefault)
FiInlet4Coupling1 := CouplingSUBF(FiInlet4_Origin + [0 m; 0 m; -SocketDepth(ND_FiManTrunk)], [0; 270]*deg, ND_FiManTrunk, PS_FiDefault, ["FiEntBoxCon"])
FiInlet4Tee := TeeF([FiInlet4_Origin[0]; FiInlet4_Origin[1] - ShortTeeLength(ND_FiManTrunk); Z_FiInlet4], [90; 90; 90]*deg, ND_FiManTrunk, PS_FiDefault)
FiInlet4Elbow1 := ElbowF([
    FiInlet4_Origin[0];
    FiBodyPipe_Origin[1] + S_FiBodyPluElbow + ElbowRadius(ND_FiManTrunk);
    Z_FiInlet4
], [180; 180; 0]*deg, ND_FiManTrunk, PS_FiDefault)
FiInlet4Elbow2 := ElbowF([
    FiBodyPipe_Origin[0];
    FiBodyPipe_Origin[1] + S_FiBodyPluElbow - ElbowRadius(ND_FiManTrunk);
    Z_FiInlet4
], [0; 180; 0]*deg, ND_FiManTrunk, PS_FiDefault)
FiInlet4Coupling2 := CouplingF([
    FiBodyPipe_Origin[0];
    FiBodyPipe_Origin[1] + outerradius(ND_FiPipe) + SocketDepth(ND_FiManTrunk);
    Z_FiInlet4
], [270; 0]*deg, ND_FiManTrunk, PS_FiDefault)
# Outlets
FiOutlet1Coupling1 := CouplingSUBF(FiOutlet1_Origin + [0 m; 0 m; -SocketDepth(ND_FiManTrunk)], [0; 270]*deg, ND_FiManTrunk, PS_FiDefault, ["FiExitBoxCon"])
FiOutlet1Tee := TeeF([FiOutlet1_Origin[0]; FiOutlet1_Origin[1] - ShortTeeLength(ND_FiManTrunk); Z_FiOutlet1], [90; 90; 90]*deg, ND_FiManTrunk, PS_FiDefault)
FiOutlet1Elbow1 := ElbowF([
    FiOutlet1_Origin[0];
    FiBodyPipe_Origin[1] + S_FiBodyPluElbow + ElbowRadius(ND_FiManTrunk);
    Z_FiOutlet1
], [180; 0; 0]*deg, ND_FiManTrunk, PS_FiDefault)
FiOutlet1Elbow2 := ElbowF([
    FiBodyPipe_Origin[0];
    FiBodyPipe_Origin[1] + S_FiBodyPluElbow - ElbowRadius(ND_FiManTrunk);
    Z_FiOutlet1
], [0; 0; 0]*deg, ND_FiManTrunk, PS_FiDefault)
FiOutlet1Coupling2 := CouplingF([
    FiBodyPipe_Origin[0];
    FiBodyPipe_Origin[1] + outerradius(ND_FiPipe) + SocketDepth(ND_FiManTrunk);
    Z_FiOutlet1
], [270; 0]*deg, ND_FiManTrunk, PS_FiDefault)
FiOutlet2Coupling1 := CouplingSUBF(FiOutlet2_Origin + [0 m; 0 m; -SocketDepth(ND_FiManTrunk)], [0; 270]*deg, ND_FiManTrunk, PS_FiDefault, ["FiExitBoxCon"])
FiOutlet2Tee := TeeF([FiOutlet2_Origin[0]; FiOutlet2_Origin[1] - ShortTeeLength(ND_FiManTrunk); Z_FiOutlet2], [90; 90; 90]*deg, ND_FiManTrunk, PS_FiDefault)
FiOutlet2Coupling2 := CouplingF([
    FiBodyPipe_Origin[0];
    FiBodyPipe_Origin[1] + outerradius(ND_FiPipe) + SocketDepth(ND_FiManTrunk);
    Z_FiOutlet2
], [270; 0]*deg, ND_FiManTrunk, PS_FiDefault)
FiOutlet3Coupling1 := CouplingSUBF(FiOutlet3_Origin + [0 m; 0 m; -SocketDepth(ND_FiManTrunk)], [0; 270]*deg, ND_FiManTrunk, PS_FiDefault, ["FiExitBoxCon"])
FiOutlet3Tee := TeeF([FiOutlet3_Origin[0]; FiOutlet3_Origin[1] - ShortTeeLength(ND_FiManTrunk); Z_FiOutlet3], [90; 90; 90]*deg, ND_FiManTrunk, PS_FiDefault)
FiOutlet3Elbow1 := ElbowF([
    FiOutlet3_Origin[0];
    FiBodyPipe_Origin[1] + S_FiBodyPluElbow + ElbowRadius(ND_FiManTrunk);
    Z_FiOutlet3
], [180; 180; 0]*deg, ND_FiManTrunk, PS_FiDefault)
FiOutlet3Elbow2 := ElbowF([
    FiBodyPipe_Origin[0];
    FiBodyPipe_Origin[1] + S_FiBodyPluElbow - ElbowRadius(ND_FiManTrunk);
    Z_FiOutlet3
], [0; 180; 0]*deg, ND_FiManTrunk, PS_FiDefault)
FiOutlet3Coupling2 := CouplingF([
    FiBodyPipe_Origin[0];
    FiBodyPipe_Origin[1] + outerradius(ND_FiPipe) + SocketDepth(ND_FiManTrunk);
    Z_FiOutlet3
], [270; 0]*deg, ND_FiManTrunk, PS_FiDefault)
FiPluFittingsFrz := FreezeLayer("FiFittingsPlu")
FiPluFittings := stack(FiPluFittingsLyr, FiInlet1Coupling1, FiInlet1Tee, FiInlet1Elbow1, FiInlet1Elbow2, FiInlet1Coupling2, FiInlet2Coupling1, FiInlet2Tee, FiInlet2Elbow1, FiInlet2Elbow2, FiInlet2Coupling2, FiInlet3Coupling1, FiInlet3Tee, FiInlet3Elbow1, FiInlet3Elbow2, FiInlet3Coupling2, FiInlet4Coupling1, FiInlet4Tee, FiInlet4Elbow1, FiInlet4Elbow2, FiInlet4Coupling2, FiOutlet1Coupling1, FiOutlet1Tee, FiOutlet1Elbow1, FiOutlet1Elbow2, FiOutlet1Coupling2, FiOutlet2Coupling1, FiOutlet2Tee, FiOutlet2Coupling2, FiOutlet3Coupling1, FiOutlet3Tee, FiOutlet3Elbow1, FiOutlet3Elbow2, FiOutlet3Coupling2, FiPluFittingsFrz)
FiPluValvesLyr := layer_new("FiValvesPlu", blue3)
Π_PurgeValves := outerdiameter(ND_FiManTrunk)/(3.439*in)
DrawInlet1PurgeValve := insertdwg("https://confluence.cornell.edu/download/attachments/173604905/PvcBallValve+Scaled.dwg", [
    FiInlet1_Origin[0];
    FiInlet1_Origin[1];
    Z_FiInlet1 - TeeLength(ND_FiManTrunk)/2 - SocketDepth(ND_FiManTrunk) - ChkValveLength(ND_FiManTrunk)
], Π_PurgeValves, Π_PurgeValves, 0 deg)
RotInlet1PurgeValve := Rotate3DLast(FiInlet1_Origin, "z", 180 deg)
DrawInlet2PurgeValve := insertdwg("https://confluence.cornell.edu/download/attachments/173604905/PvcBallValve+Scaled.dwg", [
    FiInlet2_Origin[0];
    FiInlet2_Origin[1];
    Z_FiInlet2 - TeeLength(ND_FiManTrunk)/2 - SocketDepth(ND_FiManTrunk) - ChkValveLength(ND_FiManTrunk)
], Π_PurgeValves, Π_PurgeValves, 0 deg)
RotInlet2PurgeValve := Rotate3DLast(FiInlet2_Origin, "z", 180 deg)
DrawInlet3PurgeValve := insertdwg("https://confluence.cornell.edu/download/attachments/173604905/PvcBallValve+Scaled.dwg", [
    FiInlet3_Origin[0];
    FiInlet3_Origin[1];
    Z_FiInlet3 - TeeLength(ND_FiManTrunk)/2 - SocketDepth(ND_FiManTrunk) - ChkValveLength(ND_FiManTrunk)
], Π_PurgeValves, Π_PurgeValves, 0 deg)
RotInlet3PurgeValve := Rotate3DLast(FiInlet3_Origin, "z", 180 deg)
DrawInlet4PurgeValve := insertdwg("https://confluence.cornell.edu/download/attachments/173604905/PvcBallValve+Scaled.dwg", [
    FiInlet4_Origin[0];
    FiInlet4_Origin[1];
    Z_FiInlet4 - TeeLength(ND_FiManTrunk)/2 - SocketDepth(ND_FiManTrunk) - ChkValveLength(ND_FiManTrunk)
], Π_PurgeValves, Π_PurgeValves, 0 deg)
RotInlet4PurgeValve := Rotate3DLast(FiInlet4_Origin, "z", 180 deg)
DrawOutlet1PurgeValve := insertdwg("https://confluence.cornell.edu/download/attachments/173604905/PvcBallValve+Scaled.dwg", [
    FiOutlet1_Origin[0];
    FiOutlet1_Origin[1];
    Z_FiOutlet1 - TeeLength(ND_FiManTrunk)/2 - SocketDepth(ND_FiManTrunk) - ChkValveLength(ND_FiManTrunk)
], Π_PurgeValves, Π_PurgeValves, 0 deg)
RotOutlet1PurgeValve := Rotate3DLast(FiOutlet1_Origin, "z", 180 deg)
DrawOutlet2PurgeValve := insertdwg("https://confluence.cornell.edu/download/attachments/173604905/PvcBallValve+Scaled.dwg", [
    FiOutlet2_Origin[0];
    FiOutlet2_Origin[1];
    Z_FiOutlet2 - TeeLength(ND_FiManTrunk)/2 - SocketDepth(ND_FiManTrunk) - ChkValveLength(ND_FiManTrunk)
], Π_PurgeValves, Π_PurgeValves, 0 deg)
RotOutlet2PurgeValve := Rotate3DLast(FiOutlet2_Origin, "z", 180 deg)
DrawOutlet3PurgeValve := insertdwg("https://confluence.cornell.edu/download/attachments/173604905/PvcBallValve+Scaled.dwg", [
    FiOutlet3_Origin[0];
    FiOutlet3_Origin[1];
    Z_FiOutlet3 - TeeLength(ND_FiManTrunk)/2 - SocketDepth(ND_FiManTrunk) - ChkValveLength(ND_FiManTrunk)
], Π_PurgeValves, Π_PurgeValves, 0 deg)
RotOutlet3PurgeValve := Rotate3DLast(FiOutlet3_Origin, "z", 180 deg)
FiPluValvesFrz := FreezeLayer("FiValvesPlu")
FiPluValves := stack(FiPluValvesLyr, DrawInlet1PurgeValve, RotInlet1PurgeValve, DrawInlet2PurgeValve, RotInlet2PurgeValve, DrawInlet3PurgeValve, RotInlet3PurgeValve, DrawInlet4PurgeValve, RotInlet4PurgeValve, DrawOutlet1PurgeValve, RotOutlet1PurgeValve, DrawOutlet2PurgeValve, RotOutlet2PurgeValve, DrawOutlet3PurgeValve, RotOutlet3PurgeValve, FiPluValvesFrz)
# Module Plumbing
# Rotation Angles for Manifolds (Assume trunks are drawn along negative y axis; rotate around FiBody origin).
AN_InletTrunk4 := 0 deg
AN_OutletTrunk3 := 0 deg
AN_InletTrunk3 := 0 deg
AN_OutletTrunk2 := 0 deg
AN_InletTrunk2 := 0 deg
AN_OutletTrunk1 := 0 deg
AN_InletTrunk1 := 0 deg
AN_OutletTrunk := [AN_OutletTrunk3; AN_OutletTrunk2; AN_OutletTrunk1]
AN_InletTrunk := [AN_InletTrunk4; AN_InletTrunk3; AN_InletTrunk2; AN_InletTrunk1]
FiManInlet4_Origin := [
    FiBodyPipe_Origin[0];
    FiBodyPipe_Origin[1] + innerdiameter(ND_FiPipe, PS_FiDefault)/2 - T_Flange;
    Z_FiInlet4
]
FiBranch_Origin(i) := [
    FiBodyPipe_Origin[0] + L_FiManBranch[i] + 1/2*outerdiameter(ND_FiManTrunk);
    FiBodyPipe_Origin[1] + innerdiameter(ND_FiPipe, PS_FiDefault)/2 - S_FiBranchFromWall - B_FiManBranch*i;
    FiManInlet4_Origin[2]
]
FiManAdapterLyr := layer_new("FiManFittingPlu", green)
DrawFiManAdapter := MaleAdapterF(FiManInlet4_Origin, [270; 0]*deg, ND_FiManTrunk, PS_FiBranch)
FiManAdapterFrz := FreezeLayer("FiManFittingPlu")
FiManAdapters := stack(FiManAdapterLyr, DrawFiManAdapter, FiManAdapterFrz)
FiManTrunkCapLyr := layer_new("FiManTrunkCapPlu", red)
FiManTrunkCap := CapF(FiManInlet4_Origin + [0; -L_FiManTrunk; 0], [270; 0]*deg, ND_FiManTrunk)
FiManTrunkCapFrz := FreezeLayer("FiManTrunkCapPlu")
FiManTrunkCaps := stack(FiManTrunkCapLyr, FiManTrunkCap, FiManTrunkCapFrz)
FiManBranchPlu :=
    Local ← layer_new("FiManBranchPlu", blue)
    for i ∈ 0 .. N_FiManBranch - 1
        Local ← stack(Local, PipeF(FiBranch_Origin(i), (L_FiManBranch[i] + outerdiameter(ND_FiManTrunk)/2)*2, [0; 0]*deg, ND_FiManBranch, PS_FiBranch))
    Local
FiManBranchFrz := FreezeLayer("FiManBranchPlu")
FiBranchCut := BoxF([-L_SlotCut*0.5; 0; L_FiManSlotOuter*0.5] + FiManInlet4_Origin, [L_SlotCut*0.5; -L_FiManTrunk; -(L_FiManSlotOuter*0.5)] + FiManInlet4_Origin, [0; 0; 0]*deg)
SubtractFiBranches := SubtractF(["FiManBranchPlu"], "DeleteMe")
FiBranches := stack(FiManBranchPlu, FiManBranchFrz, FiBranchCut, GroupDelete, SubtractFiBranches)
FiManBranchCapPlu :=
    Local ← layer_new("FiManBranchCapsPlu", red)
    for i ∈ 0 .. N_FiManBranch - 1
        Local ← stack(Local, CutCapF(FiBranch_Origin(i), CapHeight(ND_FiManBranch), [0; 0]*deg, ND_FiManBranch))
    Local
MirrorFiManBranchCaps := MirrorAll([FiManInlet4_Origin[0]; FiManInlet4_Origin[1]], [FiManInlet4_Origin[0]; FiManInlet4_Origin[1] + S_Fitting], "n")
FiManBranchCapFrz := FreezeLayer("FiManBranchCapsPlu")
FiBranchCaps := stack(FiManBranchCapPlu, MirrorFiManBranchCaps, FiManBranchCapFrz)
FiManTrunkLyr := layer_new("FiManTrunkPlu", blue)
FiManTrunk := PipeF(FiManInlet4_Origin, L_FiManTrunk, [90; 0]*deg, ND_FiManTrunk, PS_FiBranch)
FiManTrunkFrz := FreezeLayer("FiManTrunkPlu")
FiManTrunks := stack(FiManTrunkLyr, FiManTrunk, FiManTrunkFrz)
FiManArray := stack(ThawMultiple(["FiMan*Plu"]), view("f"), Array_All(N_FiLayer + 1, 1, H_FiLayer), FreezeMultiple(["FiMan*Plu"]))
FiInletRotate :=
    rot ← stack(ThawMultiple(["FiMan*Plu"]), view("f"))
    for i ∈ 0 .. 3
        rot ←
            if AN_InletTrunk[i] ≠ 0
                stack(rot, stack(concat("rotate3d", sp, "w"), concat(point([
                    FiManInlet4_Origin[0] - innerdiameter(ND_FiPipe, PS_FiDefault);
                    FiManInlet4_Origin[2] - 1.1*ConRadius(ND_FiManTrunk) + 2*H_FiLayer*i;
                    0
                ]), sp, point([
                    FiManInlet4_Origin[0] + innerdiameter(ND_FiPipe, PS_FiDefault);
                    FiManInlet4_Origin[2] + 1.1*ConRadius(ND_FiManTrunk) + 2*H_FiLayer*i;
                    0
                ]), sp), concat("y", sp, point([FiBodyPipe_Origin[0]; FiBodyPipe_Origin[2]; -FiBodyPipe_Origin[1]][:, 0]), sp, stringit_nounits(AN_InletTrunk[i]/deg))))
            rot otherwise
    rot
FiOutletRotate :=
    rot ← stack(view("f"))
    for i ∈ 0 .. 2
        rot ←
            if AN_OutletTrunk[i] ≠ 0
                stack(rot, stack(concat("rotate3d", sp, "w"), concat(point([
                    FiManInlet4_Origin[0] - innerdiameter(ND_FiPipe, PS_FiDefault);
                    FiManInlet4_Origin[2] - 1.1*ConRadius(ND_FiManTrunk) + 2*H_FiLayer*i + H_FiLayer;
                    0
                ]), sp, point([
                    FiManInlet4_Origin[0] + innerdiameter(ND_FiPipe, PS_FiDefault);
                    FiManInlet4_Origin[2] + 1.1*ConRadius(ND_FiManTrunk) + H_FiLayer + 2*H_FiLayer*i;
                    0
                ]), sp), concat("y", sp, point([FiBodyPipe_Origin[0]; FiBodyPipe_Origin[2]; -FiBodyPipe_Origin[1]][:, 0]), sp, stringit_nounits(AN_OutletTrunk[i]/deg))))
            rot otherwise
    rot ← stack(rot, FreezeMultiple(["FiMan*Plu"]))
    rot
FiModulePlumbing := stack(FiManAdapters, FiManTrunkCaps, FiBranches, FiBranchCaps, FiManTrunks, FiManArray, FiInletRotate, FiOutletRotate, view("t"))
# Backwash Plumbing
FiBwPluLyr := layer_new("FiBwPlu", blue)
DrawBwPipeOut := PipeSUBF([
    FiBodyPipe_Origin[0] - innerR(ND_FiPipe, PS_FiDefault);
    FiBodyPipe_Origin[1];
    Z_FiBwPipe + ConRadius(ND_FiBwTrunk)
], (outerdiameter(ND_FiPipe) - innerdiameter(ND_FiPipe, PS_FiDefault))/2 + SocketDepth(ND_FiBwTrunk), [0; 0]*deg, ND_FiBwTrunk, PS_FiDefault, ["FiBodyPlu"])
DrawBwPipeHoriz := PipeF([
    FiBodyPipe_Origin[0] - outerradius(ND_FiPipe) - (CouplingLength(ND_FiBwTrunk) - SocketDepth(ND_FiBwTrunk));
    FiBodyPipe_Origin[1];
    Z_FiBwPipe + ConRadius(ND_FiBwTrunk)
], 2*SocketDepth(ND_FiBwTrunk), [0; 0]*deg, ND_FiBwTrunk, PS_FiDefault)
DrawBwPipeVert := PipeF([
    FiBodyPipe_Origin[0] - outerradius(ND_FiPipe) - CouplingLength(ND_FiBwTrunk) - SocketDepth(ND_FiBwTrunk) - ShortTeeLength(ND_FiBwTrunk);
    FiBodyPipe_Origin[1];
    Z_FiBwPipe + ConRadius(ND_FiBwTrunk) - TeeLength(ND_FiBwTrunk)/2
], Z_FiBwPipe - Z_FiSiphonOutlet + ConRadius(ND_FiBwTrunk) - TeeLength(ND_FiBwTrunk)/2 - (ChkValveLength(ND_FiBwTrunk) - SocketDepth(ND_FiBwTrunk)), [0; 270]*deg, ND_FiBwTrunk, PS_FiDefault)
DrawBwPipeBendStub1 := PipeF([
    FiBodyPipe_Origin[0] - outerradius(ND_FiPipe) - CouplingLength(ND_FiBwTrunk) - SocketDepth(ND_FiBwTrunk) - ShortTeeLength(ND_FiBwTrunk);
    FiBodyPipe_Origin[1];
    Z_FiSiphonOutlet + SocketDepth(ND_FiBwTrunk)
], 2*SocketDepth(ND_FiBwTrunk), [0; 270]*deg, ND_FiBwTrunk, PS_FiDefault)
DrawBwPipeBendStub2 := PipeF([
    FiBodyPipe_Origin[0] - outerradius(ND_FiPipe) - CouplingLength(ND_FiBwTrunk) - SocketDepth(ND_FiBwTrunk) - ShortTeeLength(ND_FiBwTrunk) - ElbowRadius(ND_FiBwTrunk);
    FiBodyPipe_Origin[1];
    Z_FiSiphonOutlet - SocketDepth(ND_FiBwTrunk) - ElbowRadius(ND_FiBwTrunk)
], 2*SocketDepth(ND_FiBwTrunk), [0; 0]*deg, ND_FiBwTrunk, PS_FiDefault)
FrzFiBwPluLyr := FreezeLayer("FiBwPlu")
FiBwFittingsLyr := layer_new("FiBwFittings", green)
DrawBwCouplingOut := CouplingF([
    FiBodyPipe_Origin[0] - outerradius(ND_FiPipe) - SocketDepth(ND_FiBwTrunk);
    FiBodyPipe_Origin[1];
    Z_FiBwPipe + ConRadius(ND_FiBwTrunk)
], [0; 0; 0]*deg, ND_FiBwTrunk, PS_FiDefault)
DrawBwTee := TeeF([
    FiBodyPipe_Origin[0] - outerradius(ND_FiPipe) - CouplingLength(ND_FiBwTrunk) - SocketDepth(ND_FiBwTrunk);
    FiBodyPipe_Origin[1];
    Z_FiBwPipe + ConRadius(ND_FiBwTrunk)
], [270; 0; 90]*deg, ND_FiBwTrunk, PS_FiDefault)
DrawBwElbow1 := ElbowF([
    FiBodyPipe_Origin[0] - outerradius(ND_FiPipe) - CouplingLength(ND_FiBwTrunk) - SocketDepth(ND_FiBwTrunk) - ShortTeeLength(ND_FiBwTrunk);
    FiBodyPipe_Origin[1];
    Z_FiSiphonOutlet - SocketDepth(ND_FiBwTrunk)
], [0; 0; 270]*deg, ND_FiBwTrunk, PS_FiDefault)
DrawBwElbow2 := ElbowF([
    FiBodyPipe_Origin[0] - outerradius(ND_FiPipe) - CouplingLength(ND_FiBwTrunk) - 3*SocketDepth(ND_FiBwTrunk) - ShortTeeLength(ND_FiBwTrunk) - 2*ElbowRadius(ND_FiBwTrunk);
    FiBodyPipe_Origin[1];
    Z_FiSiphonOutlet - SocketDepth(ND_FiBwTrunk)
], [180; 0; 90]*deg, ND_FiBwTrunk, PS_FiDefault)
FrzBwFittingsLyr := FreezeLayer("FiBwFittings")
FiBwRedLyr := layer_new("FiBwReducer", green)
DrawBwAirRelReducer1 := reducerF([
    FiBodyPipe_Origin[0] - outerradius(ND_FiPipe) - CouplingLength(ND_FiBwTrunk) - SocketDepth(ND_FiBwTrunk) - ShortTeeLength(ND_FiBwTrunk);
    FiBodyPipe_Origin[1];
    Z_FiBwPipe + ConRadius(ND_FiBwTrunk) + TeeLength(ND_FiBwTrunk)/2 + 2*SocketDepth(ND_FiBwTrunk)
], [0; 90; 0]*deg, ND_FiBwTrunk, 2 in, ReducerLength(ND_FiBwTrunk, 2 in), PS_FiDefault)
DrawBwAirRelReducer2 := reducerF([
    FiBodyPipe_Origin[0] - outerradius(ND_FiPipe) - CouplingLength(ND_FiBwTrunk) - SocketDepth(ND_FiBwTrunk) - ShortTeeLength(ND_FiBwTrunk);
    FiBodyPipe_Origin[1];
    Z_FiBwPipe + ConRadius(ND_FiBwTrunk) + TeeLength(ND_FiBwTrunk)/2 + 4*SocketDepth(ND_FiBwTrunk) + ReducerLength(ND_FiBwTrunk, 2 in)
], [0; 90; 0]*deg, 2 in, ND_FiAirRelValve, ReducerLength(2 in, ND_FiAirRelValve), PS_FiDefault)
FrzBwRed := FreezeLayer("FiBwReducer")
FiBwValveLyr := layer_new("FiBwValve", green)
Π_BwValve := outerdiameter(ND_FiBwTrunk)/(3.439*in)
DrawBwValve := insertdwg("https://confluence.cornell.edu/download/attachments/173604905/PvcBallValve+Scaled.dwg", [
    FiBodyPipe_Origin[0] - outerradius(ND_FiPipe) - CouplingLength(ND_FiBwTrunk) - SocketDepth(ND_FiBwTrunk) - ShortTeeLength(ND_FiBwTrunk);
    FiBodyPipe_Origin[1];
    Z_FiSiphonOutlet
], Π_BwValve, Π_BwValve, 0 deg)
DrawBwAirRelValve := insertdwg("https://confluence.cornell.edu/download/attachments/173604905/PvcBallValve+Scaled.dwg", [
    FiBodyPipe_Origin[0] - outerradius(ND_FiPipe) - CouplingLength(ND_FiBwTrunk) - SocketDepth(ND_FiBwTrunk) - ShortTeeLength(ND_FiBwTrunk);
    FiBodyPipe_Origin[1];
    Z_FiBwPipe + ConRadius(ND_FiBwTrunk) + TeeLength(ND_FiBwTrunk)/2 + 3*SocketDepth(ND_FiBwTrunk) + ReducerLength(ND_FiBwTrunk, 2 in)
], ND_FiAirRelValve/(2 in), ND_FiAirRelValve/(2 in), 0 deg)
FrzBwValveLyr := FreezeLayer("FiBwValve")
FiBw := stack(FiBwPluLyr, DrawBwPipeOut, DrawBwPipeHoriz, DrawBwPipeVert, DrawBwPipeBendStub1, DrawBwPipeBendStub2, FrzFiBwPluLyr, FiBwFittingsLyr, DrawBwCouplingOut, DrawBwTee, DrawBwElbow1, DrawBwElbow2, FrzBwFittingsLyr, FiBwRedLyr, DrawBwAirRelReducer1, FrzBwRed, FiBwValveLyr, DrawBwValve, DrawBwAirRelValve, FrzBwValveLyr)
# Bypass Plumbing
FiBypassPluLyr := layer_new("FiBypassPlu", blue)
DrawBypassPipe := PipeSUBF([
    FiDistBox_Origin[0] + L_FiDistBox/2;
    FiDistBox_Origin[1] + (T_PlantWall - (CouplingLength(ND_FiBypass) - SocketDepth(ND_FiBypass)));
    FiDistBox_Origin[2] + H_FiBypassSafety + ConRadius(ND_FiBypass)
], T_PlantWall - (CouplingLength(ND_FiBypass) - SocketDepth(ND_FiBypass)), [90; 0]*deg, ND_FiBypass, PS_FiDefault, ["FiAuxBoxCon"])
FrzFiBypassPluLyr := FreezeLayer("FiBypassPlu")
FiBypassFittingsLyr := layer_new("FiBypassFittingPlu", green)
DrawBypassCoupling := CouplingSUBF([
    FiDistBox_Origin[0] + L_FiDistBox/2;
    FiDistBox_Origin[1] + (T_PlantWall - SocketDepth(ND_FiBypass));
    FiDistBox_Origin[2] + H_FiBypassSafety + ConRadius(ND_FiBypass)
], [90; 0; 0]*deg, ND_FiBypass, PS_FiDefault, ["FiAuxBoxCon"])
FrzBypassFittingsLyr := FreezeLayer("FiBypassFittingPlu")
FiBypassPlu := stack(FiBypassPluLyr, DrawBypassPipe, FrzFiBypassPluLyr, FiBypassFittingsLyr, DrawBypassCoupling, FrzBypassFittingsLyr)
# Distribution Plumbing
FiDistPluLyr := layer_new("FiDistPlu", blue)
DrawDistPipe := PipeSUBF([
    FiDistPipe_Origin[0];
    FiDistPipe_Origin[1];
    FiDistPipe_Origin[2] - (CouplingLength(ND_DistPipe) - SocketDepth(ND_DistPipe))
], T_PlantWall, [0; 270]*deg, ND_DistPipe, PS_FiDefault, ["FiAuxBoxCon"])
FrzFiDistPluLyr := FreezeLayer("FiDistPlu")
FiDistFittingsLyr := layer_new("FiDistFittingPlu", green)
DrawDistCoupling := CouplingSUBF([FiDistPipe_Origin[0]; FiDistPipe_Origin[1]; FiDistPipe_Origin[2] - SocketDepth(ND_DistPipe)], [0; 270; 0]*deg, ND_DistPipe, PS_FiDefault, ["FiAuxBoxCon"])
FrzDistFittingsLyr := FreezeLayer("FiDistFittingPlu")
FiDistPlu := stack(FiDistPluLyr, DrawDistPipe, FrzFiDistPluLyr, FiDistFittingsLyr, DrawDistCoupling, FrzDistFittingsLyr)
# Sand Drain Plumbing
FiSandDrainPluLyr := layer_new("FiSandDrainPlu", blue)
DrawSandDrainPipeOut := PipeSUBF([
    FiBodyPipe_Origin[0] + innerR(ND_FiPipe, PS_FiDefault);
    FiBodyPipe_Origin[1];
    Z_FiInlet4 - S_Fitting
], (outerdiameter(ND_FiPipe) - innerdiameter(ND_FiPipe, PS_FiDefault))/2 + S_Fitting - ElbowRadius(ND_FiSandOutlet) + SocketDepth(ND_FiSandOutlet), [0; 180]*deg, ND_FiSandOutlet, PS_FiDefault, ["FiBodyPlu"])
DrawSandDrainPipeVert := PipeF([
    FiBodyPipe_Origin[0] + outerradius(ND_FiPipe) + S_Fitting + SocketDepth(ND_FiSandOutlet);
    FiBodyPipe_Origin[1];
    Z_FiInlet4 - S_Fitting + ElbowRadius(ND_FiSandOutlet)
], W_HumanMin + 2*SocketDepth(ND_FiSandOutlet) - ElbowRadius(ND_FiSandOutlet), [0; 90]*deg, ND_FiSandOutlet, PS_FiDefault)
DrawSandDrainPipeHoriz := PipeF([
    FiBodyPipe_Origin[0] + outerradius(ND_FiPipe) + S_Fitting + ElbowRadius(ND_FiSandOutlet) + SocketDepth(ND_FiSandOutlet);
    FiBodyPipe_Origin[1];
    Z_FiInlet4 - S_Fitting + W_HumanMin + 2*SocketDepth(ND_FiSandOutlet) + ElbowRadius(ND_FiSandOutlet)
], 5*S_Fitting - 2*ElbowRadius(ND_FiSandOutlet), [0; 180]*deg, ND_FiSandOutlet, PS_FiDefault)
DrawSandDrainPipeStub := PipeF([
    FiBodyPipe_Origin[0] + outerradius(ND_FiPipe) + 6*S_Fitting + SocketDepth(ND_FiSandOutlet);
    FiBodyPipe_Origin[1];
    Z_FiInlet4 - S_Fitting + W_HumanMin + 2*SocketDepth(ND_FiSandOutlet)
], 2*SocketDepth(ND_FiSandOutlet), [0; 270]*deg, ND_FiSandOutlet, PS_FiDefault)
FrzFiSandDrainPluLyr := FreezeLayer("FiSandDrainPlu")
FiSandDrainFittingsLyr := layer_new("FiSandDrainFittings", green)
DrawSandDrainElbow1 := ElbowF([
    FiBodyPipe_Origin[0] + outerradius(ND_FiPipe) + S_Fitting + SocketDepth(ND_FiSandOutlet);
    FiBodyPipe_Origin[1];
    Z_FiInlet4 - S_Fitting + ElbowRadius(ND_FiSandOutlet)
], [0; 0; 270]*deg, ND_FiSandOutlet, PS_FiDefault)
DrawSandDrainElbow2 := ElbowF([
    FiBodyPipe_Origin[0] + outerradius(ND_FiPipe) + S_Fitting + SocketDepth(ND_FiSandOutlet);
    FiBodyPipe_Origin[1];
    Z_FiInlet4 - S_Fitting + W_HumanMin + 2*SocketDepth(ND_FiSandOutlet)
], [180; 0; 270]*deg, ND_FiSandOutlet, PS_FiDefault)
DrawSandDrainElbow3 := ElbowF([
    FiBodyPipe_Origin[0] + outerradius(ND_FiPipe) + 6*S_Fitting + SocketDepth(ND_FiSandOutlet);
    FiBodyPipe_Origin[1];
    Z_FiInlet4 - S_Fitting + W_HumanMin + 2*SocketDepth(ND_FiSandOutlet)
], [0; 0; 90]*deg, ND_FiSandOutlet, PS_FiDefault)
FrzFiSandDrainFittingsLyr := FreezeLayer("FiSandDrainFittings")
FiSandDrainValveLyr := layer_new("FiSandDrainValve", green)
Π_SandDrainValve := outerdiameter(ND_FiSandOutlet)/(3.439*in)
DrawSandDrainValve := insertdwg("https://confluence.cornell.edu/download/attachments/173604905/PvcBallValve+Scaled.dwg", [
    FiBodyPipe_Origin[0] + outerradius(ND_FiPipe) + S_Fitting + SocketDepth(ND_FiSandOutlet);
    FiBodyPipe_Origin[1];
    Z_FiInlet4 + W_HumanMin - 3*S_Fitting
], Π_SandDrainValve, Π_SandDrainValve, 0 deg)
FrzSandDrainValveLyr := FreezeLayer("FiSandDrainValve")
FiSandDrain := stack(FiSandDrainPluLyr, DrawSandDrainPipeOut, DrawSandDrainPipeVert, DrawSandDrainPipeHoriz, DrawSandDrainPipeStub, FrzFiSandDrainPluLyr, FiSandDrainFittingsLyr, DrawSandDrainElbow1, DrawSandDrainElbow2, DrawSandDrainElbow3, FrzFiSandDrainFittingsLyr, FiSandDrainValveLyr, DrawSandDrainValve, FrzSandDrainValveLyr)
# Drain Plumbing
FiDrainPluLayer := layer_new("FiDrainPlu", blue)
FiExitBoxDrainPipe := PipeSUBF(FiExitBoxDrain_Origin + [0; 0; -(CouplingLength(ND_FiExitBoxDrain) - SocketDepth(ND_FiExitBoxDrain))], T_PlantWall, [0; 270]*deg, ND_FiExitBoxDrain, PS_FiDefault, ["FiExitBoxCon"])
FrzDrainPluLyr := FreezeLayer("FiDrainPlu")
FiDrainPlu := stack(FiDrainPluLayer, FiExitBoxDrainPipe, FrzDrainPluLyr)
FiDrainFittingLayer := layer_new("FiDrainFittingsPlu", green)
FiExitBoxDrainCoupling := CouplingSUBF(FiExitBoxDrain_Origin + [0; 0; -SocketDepth(ND_FiExitBoxDrain)], [0; 270]*deg, ND_FiExitBoxDrain, PS_FiDefault, ["FiExitBoxCon"])
FrzDrainFittingLyr := FreezeLayer("FiDrainFittingsPlu")
FiDrainFitting := stack(FiDrainFittingLayer, FiExitBoxDrainCoupling, FrzDrainFittingLyr)
FiInletChannelDrainPluLayer := layer_new("FiInletChannelDrainPlu", blue)
FiInletChannelBoxDrainPipe := PipeSUBF(FiInletChannel_Origin + [
    L_FiInletChannel/2;
    -W_FiInletChannel/2;
    -(CouplingLength(ND_FiBypassDrain) - SocketDepth(ND_FiBypassDrain))
], T_PlantWall, [0; 270]*deg, ND_FiInletChannelDrain, PS_FiDefault, ["FiInletChannelCon"])
FrzInletChannelDrainPluLyr := FreezeLayer("FiInletChannelDrainPlu")
FiInletChannelDrainPlu := stack(FiInletChannelDrainPluLayer, FiInletChannelBoxDrainPipe, FrzInletChannelDrainPluLyr)
FiInletChannelDrainFittingLayer := layer_new("FiInletChannelDrainFittingPlu", green)
FiInletChannelBoxDrainCoupling := CouplingSUBF(FiInletChannel_Origin + [L_FiInletChannel/2; -W_FiInletChannel/2; -SocketDepth(ND_FiBypassDrain)], [0; 270]*deg, ND_FiInletChannelDrain, PS_FiDefault, ["FiInletChannelCon"])
FrzInletChannelDrainFittingLyr := FreezeLayer("FiInletChannelDrainFittingPlu")
FiInletChannelDrainFitting := stack(FiInletChannelDrainFittingLayer, FiInletChannelBoxDrainCoupling, FrzInletChannelDrainFittingLyr)
FiBypassDrainPluLayer := layer_new("FiBypassDrainPlu", blue)
FiBypassBoxDrainPipe := PipeSUBF(FiBypassDrain_Origin + [0; 0; -(CouplingLength(ND_FiBypassDrain) - SocketDepth(ND_FiBypassDrain))], T_PlantWall, [0; 270]*deg, ND_FiBypassDrain, PS_FiDefault, ["FiBypassBoxCon"])
FrzBypassDrainPluLyr := FreezeLayer("FiBypassDrainPlu")
FiBypassDrainPlu := stack(FiBypassDrainPluLayer, FiBypassBoxDrainPipe, FrzBypassDrainPluLyr)
FiBypassDrainFittingLayer := layer_new("FiBypassDrainFittingPlu", green)
FiBypassBoxDrainCoupling := CouplingSUBF(FiBypassDrain_Origin + [0; 0; -SocketDepth(ND_FiBypassDrain)], [0; 270]*deg, ND_FiBypassDrain, PS_FiDefault, ["FiBypassBoxCon"])
FrzBypassDrainFittingLyr := FreezeLayer("FiBypassDrainFittingPlu")
FiBypassDrainFitting := stack(FiBypassDrainFittingLayer, FiBypassBoxDrainCoupling, FrzBypassDrainFittingLyr)
FiDrainPlumbingScript := stack(FiDrainPlu, FiDrainFitting, FiInletChannelDrainPlu, FiInletChannelDrainFitting, FiBypassDrainPlu, FiBypassDrainFitting)
# Entrance box weir removables
FiWeirLayer := layer_new("FiWeirRemovable", yellow)
SelectFiWeir := SelectLayer("FiWeirRemovable")
FiWeirFrz := FreezeLayer("FiWeirRemovable")
FiStopGate := BoxF([
    FiInletChannel_Origin[0] - T_Acrylic;
    FiInletChannel_Origin[1] - W_FiInletChannel - T_FiWeir/2 + T_Acrylic/2;
    Z_FiEntWeir - H_FiStopGate
], [
    FiInletChannel_Origin[0] + L_FiEntBox + T_Acrylic;
    FiInletChannel_Origin[1] - W_FiInletChannel - T_FiWeir/2 - T_Acrylic/2;
    Z_FiEntWeir
], [0; 0; 0]*deg)
FiSlotStopper := BoxF([
    FiInletChannel_Origin[0] + L_FiEntBox/2 - W_FiBwFlowControl/2 - T_Acrylic;
    FiInletChannel_Origin[1] - W_FiInletChannel - T_PlantWall - T_FiWeir/2 + T_Acrylic/2;
    Z_FiBwFlowControl - N_FiSlotStopper*H_FiSlotStopper
], [
    FiInletChannel_Origin[0] + L_FiEntBox/2 + W_FiBwFlowControl/2 + T_Acrylic;
    FiInletChannel_Origin[1] - W_FiInletChannel - T_PlantWall - T_FiWeir/2 - T_Acrylic/2;
    Z_FiBwFlowControl - (N_FiSlotStopper - 1)*H_FiSlotStopper
], [0; 0; 0]*deg)
ArrayFiSlotStopper := ArrayLast(N_FiSlotStopper, 1, H_FiSlotStopper)
FiRemovableWeirScript := stack(FiWeirLayer, FiStopGate, FiSlotStopper, view("f"), ArrayFiSlotStopper, view("t"), FiWeirFrz)
# Array Filter
ThawFilter := ThawMultiple(["Fi*"])
FrzLayers := FreezeMultiple(["FiInletChannelCon"; "FiInletCouplingPlu"; "FiAuxBoxCon"; "FiBypassPlu"; "FiBypassFittingPlu"; "FiDistPlu"; "FiDistFittingplu"; "FiInletChannelDrainPlu"; "FiInletChannelDrainFittingPlu"; "FiBypassDrainPlu"; "FiBypassDrainFittingPlu"])
S_Fi := L_FiEntBox + 2*T_PlantWall + L_FiDistBox
ArrayFilter := array_all(1, N_Fi, S_Fi)
FreezeFilter := FreezeMultiple(["Fi*"])
FiArray := stack(ThawFilter, FrzLayers, ArrayFilter, FreezeFilter)
ThawFilterCon := ThawMultiple(["Fi*Con"])
RenameFilterConcrete := RenameLayer("FiEntExitBoxCon", "FiCon")
GroupFilterConcrete := GroupAll("FiCon")
FreezeFi := FreezeMultiple(["Fi*"])
FiConUnion := stack(ThawFilterCon, Union_All, RenameFilterConcrete, GroupFilterConcrete, FreezeFi)
# Concrete Cuts
FiEntWeirCutout1 :=
    Local ← ""
    for i ∈ 0 .. N_Fi - 1
        Local[i] ← BoxF([
            FiInletChannel_Origin[0] + S_Fi*i;
            FiInletChannel_Origin[1] - W_FiInletChannel - T_FiWeir;
            FiInletChannel_Origin[2]
        ], [
            FiInletChannel_Origin[0] + S_Fi*i + L_FiEntBox;
            FiInletChannel_Origin[1] - W_FiInletChannel - T_PlantWall;
            FiInletChannel_Origin[2] + H_FiEntTank
        ], [0; 0; 0]*deg)
    return Local
FiEntWeirCutout2 :=
    Local ← ""
    for i ∈ 0 .. N_Fi - 1
        Local[i] ← BoxF([
            FiInletChannel_Origin[0] + S_Fi*i;
            FiInletChannel_Origin[1] - W_FiInletChannel;
            Z_FiEntWeir - H_FiStopGate
        ], [
            FiInletChannel_Origin[0] + S_Fi*i + L_FiEntBox;
            FiInletChannel_Origin[1] - W_FiInletChannel - T_FiWeir;
            FiInletChannel_Origin[2] + H_FiEntTank
        ], [0; 0; 0]*deg)
    return Local
FiEntWeirStopGateCutout :=
    Local ← ""
    for i ∈ 0 .. N_Fi - 1
        Local[i] ← BoxF([
            FiInletChannel_Origin[0] + S_Fi*i - T_Acrylic;
            FiInletChannel_Origin[1] - W_FiInletChannel - T_FiWeir/2 + T_Acrylic/2;
            Z_FiEntWeir - H_FiStopGate
        ], [
            FiInletChannel_Origin[0] + S_Fi*i + L_FiEntBox + T_Acrylic;
            FiInletChannel_Origin[1] - W_FiInletChannel - T_FiWeir/2 - T_Acrylic/2;
            FiInletChannel_Origin[2] + H_FiEntTank
        ], [0; 0; 0]*deg)
    return Local
FiEntSlotCutout :=
    Local ← ""
    for i ∈ 0 .. N_Fi - 1
        Local[i] ← BoxF([
            FiInletChannel_Origin[0] + L_FiEntBox/2 - W_FiBwFlowControl/2 + S_Fi*i;
            FiInletChannel_Origin[1] - W_FiInletChannel - T_PlantWall;
            Z_FiBwFlowControl - N_FiSlotStopper*H_FiSlotStopper
        ], [
            FiInletChannel_Origin[0] + L_FiEntBox/2 + W_FiBwFlowControl/2 + S_Fi*i;
            FiInletChannel_Origin[1] - W_FiInletChannel - T_PlantWall - T_FiWeir;
            FiInletChannel_Origin[2] + H_FiEntTank
        ], [0; 0; 0]*deg)
    return Local
FiEntStopperSlotCutout :=
    Local ← ""
    for i ∈ 0 .. N_Fi - 1
        Local[i] ← BoxF([
            FiInletChannel_Origin[0] + L_FiEntBox/2 - W_FiBwFlowControl/2 - T_Acrylic + S_Fi*i;
            FiInletChannel_Origin[1] - W_FiInletChannel - T_PlantWall - T_FiWeir/2 + T_Acrylic/2;
            Z_FiBwFlowControl - N_FiSlotStopper*H_FiSlotStopper
        ], [
            FiInletChannel_Origin[0] + L_FiEntBox/2 + W_FiBwFlowControl/2 + T_Acrylic + S_Fi*i;
            FiInletChannel_Origin[1] - W_FiInletChannel - T_PlantWall - T_FiWeir/2 - T_Acrylic/2;
            FiInletChannel_Origin[2] + H_FiEntTank
        ], [0; 0; 0]*deg)
    return Local
FiBypassWeirCutout :=
    Local ← ""
    for i ∈ 0 .. N_Fi - 1
        Local[i] ← BoxF({
            if mod(i, 2) == 0
                [
                    FiEntBox_Origin[0] + L_FiEntBox + S_Fi*i - zc;
                    FiEntBox_Origin[1] - T_PlantWall;
                    FiEntBox_Origin[2] + (Z_FiOverflowWeir - Z_FiEntTank)
                ]
            otherwise
                [
                    FiEntBox_Origin[0] + S_Fi*i + zc;
                    FiEntBox_Origin[1] - T_PlantWall;
                    FiEntBox_Origin[2] + (Z_FiOverflowWeir - Z_FiEntTank)
                ]
        }, {
            if mod(i, 2) == 0
                [
                    FiEntBox_Origin[0] + L_FiEntBox + S_Fi*i + T_PlantWall + zc;
                    FiEntBox_Origin[1] - W_FiEntBox;
                    FiEntBox_Origin[2] + H_FiEntTank
                ]
            otherwise
                [
                    FiEntBox_Origin[0] + S_Fi*i - T_PlantWall - zc;
                    FiEntBox_Origin[1] - W_FiEntBox;
                    FiEntBox_Origin[2] + H_FiEntTank
                ]
        }, [0; 0; 0]*deg)
    return Local
FiDistWeirCutout :=
    Local ← ""
    for i ∈ 0 .. N_Fi - 1
        Local[i] ← BoxF({
            [FiDistBox_Origin[0] + S_Fi*i + zc; FiDistBox_Origin[1]; FiDistBox_Origin[2] + H_FiDistBarrier] if mod(i, 2) == 0
            [FiExitBox_Origin[0] + S_Fi*i + zc; FiExitBox_Origin[1]; FiExitBox_Origin[2] + H_FiDistBarrier] otherwise
        }, {
            if mod(i, 2) == 0
                [
                    FiDistBox_Origin[0] + S_Fi*i - T_PlantWall - zc;
                    FiDistBox_Origin[1] - W_FiExitBox;
                    FiDistBox_Origin[2] + H_FiEntTank
                ]
            otherwise
                [
                    FiExitBox_Origin[0] + S_Fi*i - T_PlantWall - zc;
                    FiExitBox_Origin[1] - W_FiExitBox;
                    FiExitBox_Origin[2] + H_FiEntTank
                ]
        }, [0; 0; 0]*deg)
    return Local
FiSubtractWeirs := SubtractF(["FiCon"], "DeleteMe")
FiConCuts := stack(FiEntWeirCutout1, FiEntWeirCutout2, FiEntWeirStopGateCutout, FiEntSlotCutout, FiEntStopperSlotCutout, FiBypassWeirCutout, FiDistWeirCutout, GroupDelete, FiSubtractWeirs)
AC_Filter := stack(FiConScript, FiBody, FiPluPipes, FiPluFittings, FiPluValves, FiModulePlumbing, FiBw, FiBypassPlu, FiDistPlu, FiSandDrain, FiDrainPlumbingScript, FiRemovableWeirScript, FiArray, FiConUnion, FiConCuts)
