# Entrance Tank AutoCAD
# Layers
EtTankLayer := layer_new("EtTankCon", grey)
SelectEtTank := SelectLayer("EtTankCon")
EtTankFrz := FreezeLayer("EtTankCon")
SubtractFromEtTank := SubtractF(["EtTankCon"], "DeleteMe")
EtTrashRackLayer := layer_new("EtTrashRack", purple)
SelectEtTrashRack := SelectLayer("EtTrashRack")
EtTrashRackFrz := FreezeLayer("EtTrashRack")
SubtractFromEtTrashRack := SubtractF(["EtTrashRack"], "DeleteMe")
EtDrainFittingLayer := layer_new("EtDrainFittingPlu", green)
SelectEtDrainFitting := SelectLayer("EtDrainFitting")
EtDrainFittingFrz := FreezeLayer("EtDrainFittingPlu")
EtDrainPipeLayer := layer_new("EtDrainPipePlu", blue)
SelectEtDrainPipe := SelectLayer("EtDrainPipePlu")
EtDrainPipeFrz := FreezeLayer("EtDrainPipePlu")
EtDrainRemovableLayer := layer_new("EtDrainRemovablePlu", red)
SelectEtDrainRemovable := SelectLayer("EtDrainRemovablePlu")
EtDrainRemovableFrz := FreezeLayer("EtDrainRemovablePlu")
EtFlowControlFittingLayer := layer_new("EtFlowControlFittingPlu", green)
SelectEtFlowControlFitting := SelectLayer("EtFlowControlFittingPlu")
EtFlowControlFittingFrz := FreezeLayer("EtFlowControlFittingPlu")
EtFlowControlPipeLayer := layer_new("EtFlowControlPipePlu", blue)
SelectEtFlowControlPipe := SelectLayer("EtFlowControlPipePlu")
EtFlowControlPipeFrz := FreezeLayer("EtFlowControlPipePlu")
EtFlowControlValveLayer := layer_new("EtFlowControlValvePlu", blue2)
SelectEtFlowControlValve := SelectLayer("EtFlowControlValvePlu")
EtFlowControlValveFrz := FreezeLayer("EtFlowControlValvePlu")
EtFlowControlAdapterLayer := layer_new("EtFlowControlAdapterPlu", blue3)
SelectEtFlowControlAdapter := SelectLayer("EtFlowControlAdapter")
EtFlowControlAdapterFrz := FreezeLayer("EtFlowControlAdapterPlu")
EtEntrancePipeLayer := layer_new("EtEntrancePipePlu", blue)
SelectEtEntrancePipeLayer := SelectLayer("EtEntrancePipePlu")
EtEntrancePipeFrz := FreezeLayer("EtEntrancePipePlu")
EtRMPipeLayer := layer_new("EtRMPipePlu", blue)
SelectEtRMPipe := SelectLayer("EtRMPipePlu")
EtRMPipeFrz := FreezeLayer("EtRMPipePlu")
SubtractFromEtRMPipe := SubtractF(["EtRMPipePlu"], "DeleteMe")
EtRMFittingLayer := layer_new("EtRMFittingPlu", green)
SelectEtRMFitting := SelectLayer("EtRMFittingPlu")
EtRMFittingFrz := FreezeLayer("EtRMFittingPlu")
EtInletFittingLayer := layer_new("EtInletFittingPlu", green)
SelectEtInletFitting := SelectLayer("EtInletFittingPlu")
EtInletFittingFrz := FreezeLayer("EtInletFittingPlu")
EtInletPipeLayer := layer_new("EtInletPipePlu", blue)
SelectEtInletPipe := SelectLayer("EtInletPipePlu")
EtInletPipeFrz := FreezeLayer("EtInletPipePlu")
# Entrance tank masonry
# Origins and dimensions
Et_Origin := [
    Plant_Origin[0] - L_Sed + L_Et;
    Floc_Origin[1] + N_FlocChannels*(W_FlocChannel + T_PlantWall) + W_EtWalkway + T_PlantWall;
    Z_EtBottom
]
Et_Dim := [L_Et; W_Et; H_Et]
EtDC_Origin := Et_Origin + [-L_EtDC; W_EtDC; -T_PlantWall]
# Tank walls
EtTank := Tank(Et_Origin, Et_Dim, T_PlantWall)
# Hoppers
EtFrontBackHopperPline := Pline3D([
    Et_Origin + [0 m; 0 m; -T_PlantWall];
    Et_Origin + [0 m; 0 m; H_EtFrontSlope];
    Et_Origin + [0 m; L_EtFrontSlope; 0 m];
    Et_Origin + [0 m; L_EtFrontSlope + 2*ConRadius(ND_EtDrain); 0 m];
    Et_Origin + [0 m; W_Et; H_EtBackSlope];
    Et_Origin + [0 m; W_Et; 0 m];
    Et_Origin + [0 m; 0 m; -T_PlantWall]
])
ExtrudeEtHopperFrontBack := ExtrudeLast(-L_Et)
EtFirstHopperSidePline := Pline3D([
    Et_Origin + [-2*ConRadius(ND_EtDrain) - S_Fitting; 0 m; 0 m];
    Et_Origin + [-L_EtFirstHopper; 0 m; H_EtHopper];
    Et_Origin + [-L_EtFirstHopper - W_EtHopperPeak; 0 m; H_EtHopper];
    Et_Origin + [-L_EtFirstHopper - W_EtHopperPeak; 0 m; 0 m];
    Et_Origin + [-2*ConRadius(ND_EtDrain) - S_Fitting; 0 m; 0 m]
])
ExtrudeEtHopperSide := ExtrudeLast(-W_Et)
MirrorEtFirstHopper := MirrorLast([Et_Origin[0] - L_Et/2; Et_Origin[1]], [Et_Origin[0] - L_Et/2; Et_Origin[1] + zc], "n")
EtFullHopperSidePline := Pline3D([
    Et_Origin + [-L_EtFirstHopper; 0 m; -T_PlantWall];
    Et_Origin + [-L_EtFirstHopper; 0 m; H_EtHopper];
    Et_Origin + [-L_EtFirstHopper - W_EtHopperPeak; 0 m; H_EtHopper];
    Et_Origin + [-L_EtFirstHopper - W_EtHopperPeak - L_EtFullHopperSideSlope; 0 m; 0 m];
    Et_Origin + [-L_EtFirstHopper - W_EtHopperPeak - L_EtFullHopperSideSlope - 2*ConRadius(ND_EtDrain); 0 m; 0 m];
    Et_Origin + [-L_EtFirstHopper - W_EtHopperPeak - L_EtFullHopper; 0 m; H_EtHopper];
    Et_Origin + [-L_EtFirstHopper - 2*W_EtHopperPeak - L_EtFullHopper; 0 m; H_EtHopper];
    Et_Origin + [-L_EtFirstHopper - 2*W_EtHopperPeak - L_EtFullHopper; 0 m; 0 m];
    Et_Origin + [-L_EtFirstHopper; 0 m; -T_PlantWall]
])
ExtrudeEtFullHopperSide := ExtrudeLast(W_Et)
ArrayEtFullHopper := ArrayLast(1, N_EtFullHoppers, -L_EtFullHopper - W_EtHopperPeak)
EtHopperScript :=
    stack(EtFrontBackHopperPline, view("r"), ExtrudeEtHopperFrontBack, view("t"), EtFirstHopperSidePline, view("f"), ExtrudeEtHopperSide, view("t"), MirrorEtFirstHopper, EtFullHopperSidePline, view("f"), ExtrudeEtHopperSide, view("t"), ArrayEtFullHopper) if EN_Grit == 0
    stack(EtFrontBackHopperPline, view("r"), ExtrudeEtHopperFrontBack, view("t"), EtFirstHopperSidePline, view("f"), ExtrudeEtHopperSide, view("t"), MirrorEtFirstHopper) otherwise
# Drain channel
EtDC := DrainChannelF(EtDC_Origin, [180; 0; 0]*deg, Q_Plant, W_EtDC, H_EtDC, L_EtDC, 1 %, Nu_Water, E_Concrete, 1)
EtMasonryScript := stack(EtTankLayer, EtTank, EtHopperScript, EtDC, Union_All, EtTankFrz)
# Trash rack
EtTrashRack_Origin := Et_Origin + [-L_EtFirstHopper - W_EtHopperPeak/2 + T_Acrylic/2; -zc; H_EtHopper - zc]
EtTrashRack := BoxF(EtTrashRack_Origin, EtTrashRack_Origin + [-T_Acrylic; W_Et + 2*zc; H_Et - H_EtHopper + zc], [0; 0; 0]*deg)
EtTrashRackHole := CylinderF(EtTrashRack_Origin + [zc; zc + S_EtTrashRackHole + D_EtTrashRackHole/2; zc + S_EtTrashRackHole + D_EtTrashRackHole/2], D_EtTrashRackHole/2, T_Acrylic + 2*zc, [0; 0]*deg)
ArrayEtTrashRackHolesY := ArrayLast(1, N_EtTrashRackHolesHoriz, S_EtTrashRackHole + D_EtTrashRackHole)
ArrayEtTrashRackHolesZ := Array_All(N_EtTrashRackHolesVert, 1, S_EtTrashRackHole + D_EtTrashRackHole)
EtTrashRackScript := stack(EtTrashRack, GroupDelete, SubtractFromEtTank, EtTrashRackLayer, EtTrashRack, EtTrashRackFrz, EtTrashRackHole, view("r"), ArrayEtTrashRackHolesY, ArrayEtTrashRackHolesZ, view("t"), GroupDelete, SubtractFromEtTrashRack)
# Rapid mix pipe and LFOM
RMElbow_Origin := [
    FlocCoupling_Origin[0];
    Et_Origin[1] + W_Et - S_Fitting - ConRadius(ND_RMPipe) - ElbowRadius(ND_RMPipe);
    FlocCoupling_Origin[2]
]
L_RMPipeHoriz := RMElbow_Origin[1] - FlocCoupling_Origin[1] - CouplingLength(ND_RMPipe) + 2*SocketDepth(ND_RMPipe)
L_RMPipeVert := Z_EtTop - (RMElbow_Origin[2] + ElbowRadius(ND_RMPipe))
# RM elbow
EtRMElbow := ElbowF(RMElbow_Origin, [0; 90; 0]*deg, ND_RMPipe, PS_Default)
EtRMElbowScript := stack(EtRMFittingLayer, EtRMElbow, EtRMFittingFrz)
# RM pipes
EtRMVertPipe := PipeSUBF([
    RMElbow_Origin[0];
    RMElbow_Origin[1] + ElbowRadius(ND_RMPipe);
    RMElbow_Origin[2] + ElbowRadius(ND_RMPipe)
], L_RMPipeVert, [0; 90; 0]*deg, ND_RMPipe, PS_Default, ["EtTankCon"])
EtRMHorizPipe := PipeF(RMElbow_Origin, L_RMPipeHoriz, [90; 0; 0]*deg, ND_RMPipe, PS_Default)
EtRMPipeScript := stack(EtRMPipeLayer, EtRMVertPipe, EtRMHorizPipe, EtRMPipeFrz)
# LFOM Orifices
LFOM_Origin := [RMElbow_Origin[0]; RMElbow_Origin[1] + ElbowRadius(ND_RMPipe); ZW_EtMax - HL_Lfom]
LfomOrifices :=
    Local ← view("t")
    for h ∈ 0 .. last(H_LfomOrifices)
        if N_LfomOrifices[h] ≠ 0
            Local ← stack(Local, CylinderF([LFOM_Origin[0]; LFOM_Origin[1]; LFOM_Origin[2] + H_LfomOrifices[h]], D_LfomOrifices/2, outerradius(ND_RMPipe) + zc, [
                90 deg + (asin(0.5*S_LfomOrificesMin/(2*outerradius(ND_RMPipe))) + asin(D_LfomOrifices/(2*outerradius(ND_RMPipe))))*(mod(h, 2) == 0);
                0 deg
            ]))
        Local ← stack(Local, ArrayLastPolar([LFOM_Origin[0]; LFOM_Origin[1]; LFOM_Origin[2] + H_LfomOrifices[h]], N_LfomOrifices[h], (N_LfomOrifices[h] - 1)*(2*asin(D_LfomOrifices/(2*outerradius(ND_RMPipe))) + 2*asin(S_LfomOrificesMin/(2*outerradius(ND_RMPipe)))))) if N_LfomOrifices[h] > 1
    return Local
EtRMScript := stack(EtRMElbowScript, EtRMPipeScript, LfomOrifices, GroupDelete, SubtractFromEtRMPipe)
# Hopper drains
# Drain couplings
EtFirstDrainCoupling := CouplingSUBF(Et_Origin + [-S_Fitting - ConRadius(ND_EtDrain); L_EtWallToDrain; -SocketDepth(ND_EtDrain) + 0.0001 m], [0; 270]*deg, ND_EtDrain, PS_Default, ["EtTankCon"])
EtLastDrainCoupling := CouplingSUBF(Et_Origin + [-L_Et + S_Fitting + ConRadius(ND_EtDrain); L_EtWallToDrain; -SocketDepth(ND_EtDrain) + 0.0001 m], [0; 270]*deg, ND_EtDrain, PS_Default, ["EtTankCon"])
EtFullHopperDrainCouplings :=
    local ← view("t")
    for i ∈ 0 .. N_EtFullHoppers - 1
        Coupling ← CouplingSUBF(Et_Origin + [
            -L_EtFirstHopper - W_EtHopperPeak - L_EtFullHopper/2 - i*(L_EtFullHopper + W_EtHopperPeak);
            L_EtWallToDrain;
            -SocketDepth(ND_EtDrain) + 0.0001 m
        ], [0; 270]*deg, ND_EtDrain, PS_Default, ["EtTankCon"])
        local ← stack(local, Coupling)
    return local
EtDrainCouplingScript :=
    stack(EtDrainFittingLayer, EtFirstDrainCoupling, EtLastDrainCoupling, EtFullHopperDrainCouplings, EtDrainFittingFrz) if EN_Grit == 0
    stack(EtDrainFittingLayer, EtFirstDrainCoupling, EtLastDrainCoupling, EtDrainFittingFrz) otherwise
# Drain pipes
EtFirstDrainPipe := PipeSUBF(Et_Origin + [
    -S_Fitting - ConRadius(ND_EtDrain);
    L_EtWallToDrain;
    -CouplingLength(ND_EtDrain) + SocketDepth(ND_EtDrain)
], T_PlantWall - CouplingLength(ND_EtDrain) + SocketDepth(ND_EtDrain) + zc, [0; 270]*deg, ND_EtDrain, PS_Default, ["EtTankCon"])
EtLastDrainPipe := PipeSUBF(Et_Origin + [
    -L_Et + S_Fitting + ConRadius(ND_EtDrain);
    L_EtWallToDrain;
    -CouplingLength(ND_EtDrain) + SocketDepth(ND_EtDrain)
], T_PlantWall - CouplingLength(ND_EtDrain) + SocketDepth(ND_EtDrain) + zc, [0; 270]*deg, ND_EtDrain, PS_Default, ["EtTankCon"])
EtFullHopperDrainPipes :=
    local ← view("t")
    for i ∈ 0 .. N_EtFullHoppers - 1
        Pipe ← PipeSUBF(Et_Origin + [
            -L_EtFirstHopper - W_EtHopperPeak - L_EtFullHopper/2 - i*(L_EtFullHopper + W_EtHopperPeak);
            L_EtWallToDrain;
            -CouplingLength(ND_EtDrain) + SocketDepth(ND_EtDrain)
        ], T_PlantWall - CouplingLength(ND_EtDrain) + SocketDepth(ND_EtDrain) + zc, [0; 270]*deg, ND_EtDrain, PS_Default, ["EtTankCon"])
        local ← stack(local, Pipe)
    return local
EtDrainPipeScript :=
    stack(EtDrainPipeLayer, EtFirstDrainPipe, EtLastDrainPipe, EtFullHopperDrainPipes, EtDrainPipeFrz) if EN_Grit == 0
    stack(EtDrainPipeLayer, EtFirstDrainPipe, EtLastDrainPipe, EtDrainPipeFrz) otherwise
# Drain stubs
EtFirstDrainStub := PipeF(Et_Origin + [-S_Fitting - ConRadius(ND_EtDrain); L_EtWallToDrain; -SocketDepth(ND_EtDrain)], L_EtDrainStub, [0; 90]*deg, ND_EtDrain, PS_Default)
EtLastDrainStub := PipeF(Et_Origin + [-L_Et + S_Fitting + ConRadius(ND_EtDrain); L_EtWallToDrain; -SocketDepth(ND_EtDrain)], L_EtDrainStub, [0; 90]*deg, ND_EtDrain, PS_Default)
EtFullHopperDrainStubs :=
    local ← view("t")
    for i ∈ 0 .. N_EtFullHoppers - 1
        Pipe ← PipeF(Et_Origin + [
            -L_EtFirstHopper - W_EtHopperPeak - L_EtFullHopper/2 - i*(L_EtFullHopper + W_EtHopperPeak);
            L_EtWallToDrain;
            -SocketDepth(ND_EtDrain)
        ], L_EtDrainStub, [0; 90]*deg, ND_EtDrain, PS_Default)
        local ← stack(local, Pipe)
    return local
EtDrainStubScript :=
    stack(EtDrainRemovableLayer, EtFirstDrainStub, EtLastDrainStub, EtFullHopperDrainStubs, EtDrainRemovableFrz) if EN_Grit == 0
    stack(EtDrainRemovableLayer, EtFirstDrainStub, EtLastDrainStub, EtDrainRemovableFrz) otherwise
EtDrainScript := stack(EtDrainCouplingScript, EtDrainPipeScript, EtDrainStubScript)
# Flow control drain
# Origins
EtFlowControlElbowLow_Origin := Et_Origin + [
    -S_Fitting - 2*ConRadius(ND_EtDrain) - ConRadius(ND_EtFlowControl);
    -T_PlantWall - SocketDepth(ND_EtFlowControl);
    -T_PlantWall - ConRadius(ND_EtFlowControl)
]
EtFlowControlElbowHigh_Origin := [
    EtFlowControlElbowLow_Origin[0];
    EtFlowControlElbowLow_Origin[1];
    max(EtFlowControlElbowLow_Origin[2] + 2*SocketDepth(ND_EtFlowControl) + 2*ElbowRadius(ND_EtFlowControl) + 2*MaleAdapterLength(ND_EtFlowControl) + ValveLength(ND_EtFlowControl) - 2*ValveSocket(ND_EtFlowControl), Et_Origin[2] + H_EtFrontSlope + outerradius(ND_EtFlowControl))
]
EtFlowControlAdapterHigh_Origin := EtFlowControlElbowHigh_Origin + [
    0 m;
    -ElbowRadius(ND_EtFlowControl);
    -ElbowRadius(ND_EtFlowControl) - 2*SocketDepth(ND_EtFlowControl)
]
EtFlowControlValve_Origin := EtFlowControlAdapterHigh_Origin + [
    0 m;
    0 m;
    SocketDepth(ND_EtFlowControl) - MaleAdapterLength(ND_EtFlowControl) + 2*ValveSocket(ND_EtFlowControl) - ValveLength(ND_EtFlowControl)
]
EtFlowControlAdapterLow_Origin := EtFlowControlValve_Origin + [0 m; 0 m; -MaleAdapterLength(ND_EtFlowControl) + SocketDepth(ND_EtFlowControl)]
# Flow control fittings
EtFlowControlElbowLow := ElbowF(EtFlowControlElbowLow_Origin, [180; -90; 0]*deg, ND_EtFlowControl, PS_Default)
EtFlowControlElbowHigh := ElbowF(EtFlowControlElbowHigh_Origin, [180; 90; 0]*deg, ND_EtFlowControl, PS_Default)
EtFlowControlFittingScript := stack(EtFlowControlFittingLayer, EtFlowControlElbowLow, EtFlowControlElbowHigh, EtFlowControlFittingFrz)
# Flow control adapters
EtFlowControlAdapterLow := MaleAdapterF(EtFlowControlAdapterLow_Origin, [0; 90]*deg, ND_EtFlowControl, PS_Default)
EtFlowControlAdapterHigh := MaleAdapterF(EtFlowControlAdapterHigh_Origin, [0; -90]*deg, ND_EtFlowControl, PS_Default)
EtFlowControlAdapterScript := stack(EtFlowControlAdapterLayer, EtFlowControlAdapterLow, EtFlowControlAdapterHigh, EtFlowControlAdapterFrz)
# Flow control valve
EtFlowControlValve := insertdwg("https://confluence.cornell.edu/download/attachments/173604905/Et-Scaled-Gate-Valve-Threaded.dwg", EtFlowControlValve_Origin, 2*outerradius(ND_EtFlowControl)/(1.16 m), 2*outerradius(ND_EtFlowControl)/(1.16 m), -90 deg)
RotateEtFlowControlValve := Rotate3DLast(EtFlowControlValve_Origin, "x", 90 deg)
EtFlowControlValveScript := stack(EtFlowControlValveLayer, EtFlowControlValve, RotateEtFlowControlValve, EtFlowControlValveFrz)
# Flow control pipes
EtFlowControlHorizPipe1 := PipeSUBF(EtFlowControlElbowLow_Origin, SocketDepth(ND_EtFlowControl) + T_PlantWall + 0.0001 m, [-90; 0]*deg, ND_EtFlowControl, PS_Default, ["EtTankCon"])
EtFlowControlHorizPipe2 := PipeSUBF(EtFlowControlElbowHigh_Origin, SocketDepth(ND_EtFlowControl) + T_PlantWall + 0.0001 m, [-90; 0]*deg, ND_EtFlowControl, PS_Default, ["EtTankCon"])
EtFlowControlVertPipe1 := PipeF(EtFlowControlAdapterLow_Origin, EtFlowControlAdapterLow_Origin[2] - EtFlowControlElbowLow_Origin[2] - ElbowRadius(ND_EtFlowControl), [0; -90]*deg, ND_EtFlowControl, PS_Default)
EtFlowControlVertPipe2 := PipeF(EtFlowControlAdapterHigh_Origin, EtFlowControlElbowHigh_Origin[2] - EtFlowControlAdapterHigh_Origin[2] - ElbowRadius(ND_EtFlowControl), [0; 90]*deg, ND_EtFlowControl, PS_Default)
EtFlowControlPipeScript := stack(EtFlowControlPipeLayer, EtFlowControlHorizPipe1, EtFlowControlHorizPipe2, EtFlowControlVertPipe1, EtFlowControlVertPipe2, EtFlowControlPipeFrz)
EtFlowControlScript := stack(EtFlowControlFittingScript, EtFlowControlAdapterScript, EtFlowControlValveScript, EtFlowControlPipeScript)
EtInletElbow_Origin := Et_Origin + [-S_Fitting - ConRadius(ND_DistPipe); W_Et; H_Et + ConRadius(ND_DistPipe)]
EtInletElbow := ElbowF(EtInletElbow_Origin, [180; 90; 0]*deg, ND_DistPipe, PS_Default)
L_EtInletPipe := 1 m
EtInletPipe := PipeF(EtInletElbow_Origin, L_EtInletPipe, [-90; 0]*deg, ND_DistPipe, PS_Default)
EtInletScript := stack(EtInletFittingLayer, EtInletElbow, EtInletFittingFrz, EtInletPipeLayer, EtInletPipe, EtInletPipeFrz)
# Inlet pipe
# Add water levels
EtWaterLayer := layer_new("EtWater", blue2)
EtWater := BoxF(Et_Origin, [Et_Origin[0] - L_Et; Et_Origin[1] + W_Et; ZW_Et], [0; 0; 0]*deg)
EtRMPipeWater := CylinderF(RMElbow_Origin + [0; ElbowRadius(ND_RMPipe); ElbowRadius(ND_RMPipe)], innerdiameter(ND_RMPipe, PS_Default)/2, ZW_RMPipe - RMElbow_Origin[2] - ElbowRadius(ND_RMPipe), [0; 90]*deg)
EtWaterFrz := FreezeLayer("EtWater")
EtWaterScript := stack(EtWaterLayer, EtWater, EtRMPipeWater, EtWaterFrz)
AC_EntranceTank := stack(EtMasonryScript, EtDrainScript, EtFlowControlScript, EtTrashRackScript, EtRMScript, EtInletScript)
