Q_Plant := 15*L/s
# [reference: ExpertInputs.xmcd]
# [reference: MathFunctions.xmcd]
# [reference: PipeDatabase.xmcd]
# [reference: MaterialsDatabase.xmcd]
# [reference: FluidsFunctions.xmcd]
# [reference: SedTankFunctions.xmcd]
# [reference: CdcFunctions.xmcd]
# [reference: LfomFunctions.xmcd]
# [reference: SedimentationTank.xmcd]
# [reference: Flocculator.xmcd]
# [reference: EntranceTankapb224.xmcd]
# [reference: EntranceTank.xmcd]
# [reference: StackedRapidSandFilter.xmcd]
# [reference: LinearCdc.xmcd]
# [reference: ChemStorageTanks.xmcd]
# AutoCAD drawing programs:
# Translators:
# These are the codes that take MathCAD outputs and create AutoCAD scripts that are used to draw the plant (formerly Basics)
# [reference: MtoATranslators.xmcd]
# The wrapped MtoA translator contains the functions that the user will want to access. These functions will draw pieces with full functionality - specifying the location, dimension, and orientation of the object. Also, it contains layer control and subtraction capabilities for grouped objects.
# [reference: MtoATranslatorsWrapped.xmcd]
# Drawing functions:
# [reference: ChannelF.xmcd]
# [reference: PlumbingF.xmcd]
# [reference: TankF.xmcd]
# [reference: StairsF.xmcd]
# [reference: DrainChannelF.xmcd]
# AutoCAD Script Files:
# [reference: FlocculatorAC.xmcd]
# [reference: SedimentationTankAC.xmcd]
# Note : This file does not have high flow capabilities. mrf222
# Entrance Tank AutoCAD
# Entrance Tank Concrete
# Origins and dimensions
Et_Origin0 := [
    Plant_Origin[0] - L_Sed + L_Et - {
        (0 m) if EN_DoubleTrain == 0
        (W_DCWalkway + 3*T_PlantWall + L_LfomChannel) otherwise
    };
    Floc_Origin[1] + {
        (N_FlocChannels*(W_FlocChannel + T_FlocChannelWall)) + W_EtWalkway + 2*T_PlantWall - T_FlocChannelWall if Q_Plant > Q_PlantMaxLF
        L_Floc + T_PlantWall + L_ChannelSlot + W_EtWalkway otherwise
    };
    Z_Et
] = [-3.27707; 6.1004; 1.41841] m
Et_Origin1 := [
    Plant_Origin[0] - L_Sed + L_Et;
    Floc_Origin[1] + (N_FlocChannels*(W_FlocChannel + T_PlantWall)) + W_EtWalkway + T_PlantWall;
    Z_Et
] = [-3.27707; 6.1004; 1.41841] m
Et_Origin :=
    Et_Origin0 if EN_EtGrit == 0
    Et_Origin1 otherwise
Et_Origin = [-3.27707; 6.1004; 1.41841] m
Et_Dim := [L_Et; W_Et; H_Et + DropEt] = [4.2398; 1.23818; 1.13375] m
EtHopper_Origin := [
    Et_Origin[0] - S_Fitting - ConRadius(ND_EtDrain) - L_EtHopper/2 - T_EtHopperLedge;
    Et_Origin[1] + W_Et;
    Et_Origin[2]
] = [-4.46242; 7.33857; 1.41841] m
T_EtHopperLedge = 0.15 m
Hopper_FarCorner := [Et_Origin[0] - L_EtHopper - T_EtHopperLedge; Et_Origin[1]; Z_EtHopper] = [-5.29617; 6.1004; 2.25216] m
W_Et = 1.23818 m
L_EtHopperBack = 0.636575 m
HopperBack_FarCorner := [
    Et_Origin[0] - {
        L_EtHopperBack if EN_DoubleTrain == 0
        L_EtHopperBack otherwise
    };
    Et_Origin[1] + L_Et + W_Et;
    Et_Origin[2] + H_EtHopperBack
] = [-3.91364; 11.5784; 2.05498] m
HopperFront_FarCorner := [
    Et_Origin[0] - {
        (L_EtHopperFront/2) if EN_DoubleTrain == 1
        -L_EtHopperFront otherwise
    };
    Et_Origin[1] + L_Et;
    Et_Origin[2] + H_EtHopperFront
] = [-2.87707; 10.3402; 1.81841] m
# Changed by mrf222 to be as close to the front of the tank as possible
EtDC_Origin := Et_Origin + [-L_EtDC; L_EtSupport; -T_PlantWall] = [-7.11683; 6.5004; 1.26841] m
EtDC_Origin = [-7.11683; 6.5004; 1.26841] m
# Origin for LFOM channel.
EtDC_OriginAndy := Et_Origin + [-L_EtDC; L_EtHopperFront; -T_PlantWall] = [-7.11683; 6.5004; 1.26841] m
LfomChannel_Origin := [
    Et_Origin[0] - L_Et + W_DCWalkway + 3*T_PlantWall + 2*L_LfomChannel;
    Et_Origin[1] + T_LfomChannelWall;
    Floc_Origin[2]
] = [-4.91137; 6.2504; 0] m
# Hoppers and tank walls
EntTankLayer := layer_new("EtCon", grey)
EtHopper := WedgeF(EtHopper_Origin, Hopper_FarCorner, [0; 0; 0]*deg)
MirrorEtHopper := MirrorLast([EtHopper_Origin[0] + T_EtHopperLedge/2; EtHopper_Origin[1]], [EtHopper_Origin[0] + T_EtHopperLedge/2; EtHopper_Origin[1] + zc], "n")
MirrorEtHopper := MirrorLast([EtHopper_Origin[0] + T_EtHopperLedge/2; EtHopper_Origin[1]], [EtHopper_Origin[0] + T_EtHopperLedge/2; EtHopper_Origin[1] + zc], "n")
MirrorEtHopper = "_mirror l  -4.38742,7.33857 -4.38742,7.34857 n  "
EtHopperLedge := BoxF(EtHopper_Origin, EtHopper_Origin + [T_EtHopperLedge; -W_Et; H_EtHopper], [0; 0; 0]*deg)
EtHopper_Origin = [-4.46242; 7.33857; 1.41841] m
AddHopper :=
    1 if EN_DoubleTrain == 0
    4 otherwise
ArrayEtHoppers := array_all(1, N_EtFullHopper + AddHopper, -L_EtHopper - T_EtHopperLedge)
Hopper_FarCorner = [-5.29617; 6.1004; 2.25216] m
EtHopperBack := WedgeF(Et_Origin + [0; W_Et; 0], HopperBack_FarCorner, [90; 0; 0]*deg)
Et_Origin = [-3.27707; 6.1004; 1.41841] m
EtHopperFront := WedgeF(Et_Origin, HopperFront_FarCorner, [90; 0; 0]*deg)
HopperBack_FarCorner = [-3.91364; 11.5784; 2.05498] m
EntTank := Tank(Et_Origin, Et_Dim, T_PlantWall)
# Drain channel
HopperFront_FarCorner = [-2.87707; 10.3402; 1.81841] m
DrainAngle :=
    (1 %) if EN_DoubleTrain == 0
    (2 %) otherwise
EtDC == DrainChannelF(EtDC_Origin + [0 m; W_Et/2 - W_EtDC/2; 0 m], [180; 0; 0]*deg, Q_EtDCMax, W_EtDC, H_EtDC, L_EtDC, DrainAngle, Nu_Water, E_Concrete, 1)
# Changed origin point of the drain channel.
EtDC := DrainChannelF(EtDC_Origin + [0 m; W_EtDC; 0 m], [180; 0; 0]*deg, Q_EtDCMax, W_EtDC, H_EtDC, L_EtDC, DrainAngle, Nu_Water, E_Concrete, 1)
FreezeEntTank := FreezeLayer("EtCon")
# Subtract Cutout for Main Plant Drain Channel
PlantDCCutout := BoxF([
    (Plant_Origin[0] - L_Sed - T_PlantWall - W_PlantDC);
    Et_Origin[1] + .5*L_EtHopperFront;
    Et_Origin[2] - T_PlantWall - H_EtDC - T_ChannelWall - 3*T_ConcreteMin
], [
    Plant_Origin[0] - L_Sed - T_PlantWall;
    Et_Origin[1] + .5*L_EtHopperFront + W_EtDC;
    Et_Origin[2] - T_PlantWall
], [0; 0; 0]*deg)
# Subtract extra Hopper length
HopperSubtraction := BoxF([Et_Origin[0] - Et_Dim[0] - T_PlantWall; Et_Origin[1]; Et_Origin[2]], [
    Et_Origin[0] - Et_Dim[0] - T_PlantWall - 2*L_EtHopper;
    Et_Origin[1] + W_Et;
    Et_Origin[2] + H_Et + DropEt
], [0; 0; 0]*deg)
HopperSkim := BoxF([
    Et_Origin[0] - Et_Dim[0];
    Et_Origin[1];
    Et_Origin[2] + H_Et + DropEt - (HL_Lfom + H_PlantFreeboard + T_ConcreteMin)
], [Et_Origin[0]; Et_Origin[1] + W_Et; Et_Origin[2] + H_Et + DropEt], [0; 0; 0]*deg)
# Trash rack slots
TrashRackSlot1 := BoxF(EtHopper_Origin + [T_EtHopperLedge/2 - T_ConcreteMin/2; 2*D_Rebar; H_EtHopper - 2*D_Rebar], EtHopper_Origin + [
    T_EtHopperLedge/2 - T_ConcreteMin/2 - 2*D_Rebar;
    -W_Et - 2*D_Rebar;
    H_EtHopper + H_EtTop + H_PlantFreeboard + zc
], [0; 0; 0]*deg)
TrashRackSlot2 := BoxF(EtHopper_Origin + [T_EtHopperLedge/2 + T_ConcreteMin/2; 2*D_Rebar; H_EtHopper - 2*D_Rebar], EtHopper_Origin + [
    T_EtHopperLedge/2 + T_ConcreteMin/2 + 2*D_Rebar;
    -W_Et - 2*D_Rebar;
    H_EtHopper + H_EtTop + H_PlantFreeboard + zc
], [0; 0; 0]*deg)
SubtractTrashRackSlots := SubtractF(["EtCon"], "DeleteMe")
# No-Grit Features
EtDrainSlope := WedgeF(Et_Origin - [L_Et; 0; 0], Et_Origin + [
    -L_Et + ConRadius(ND_EtFlowControl)/tan(30 deg);
    2*ConRadius(ND_EtFlowControl);
    -ConRadius(ND_EtFlowControl)
], [0; 0; 0]*deg)
FreezeEntTank := FreezeLayer("EtCon")
SubtractEtDrainSlope := SubtractF(["EtCon"], "DeleteMe")
EtBaffleLayer := layer_new("EtBaffle", ltgrey)
EtBaffle := BoxSUBF(Et_Origin + [-S_EtBaffle; -T_ConcreteMin; S_EtBaffleBottom], Et_Origin + [-S_EtBaffle - T_ConcreteMin; W_Et + T_ConcreteMin; H_Et + DropEt], [0; 0; 0]*deg, ["EtCon"])
EtBaffleFrz := FreezeLayer("EtBaffle")
EtTankScript :=
    stack(EntTankLayer, EntTank, FreezeEntTank, EtDrainSlope, GroupDelete, SubtractEtDrainSlope, EtBaffleLayer, EtBaffle, EtBaffleFrz) if EN_EtGrit == 1
    stack(EntTankLayer, EtHopper, MirrorEtHopper, EtHopperLedge, ArrayEtHoppers, EtHopperBack, EtHopperFront, EntTank, EtDC, Union_All, FreezeEntTank, PlantDCCutout, HopperSkim, TrashRackSlot1, TrashRackSlot2, HopperSubtraction, GroupDelete, SubtractTrashRackSlots) if EN_DoubleTrain == 1 and EN_EtGrit == 0
    stack(EntTankLayer, EtHopper, MirrorEtHopper, EtHopperLedge, ArrayEtHoppers, EtHopperBack, EtHopperFront, EntTank, EtDC, Union_All, FreezeEntTank, TrashRackSlot1, TrashRackSlot2, GroupDelete, SubtractTrashRackSlots) otherwise
# Entrance Tank Concrete Two Inlets
# Origins and dimensions
Et_Origin0 := [
    Plant_Origin[0] - L_Sed + L_Et;
    Floc_Origin[1] + {
        (N_FlocChannels*(W_FlocChannel + T_FlocChannelWall)) + W_EtWalkway + 2*T_PlantWall - T_FlocChannelWall if Q_Plant > Q_PlantMaxLF
        L_Floc + T_PlantWall + L_ChannelSlot + W_EtWalkway otherwise
    };
    Z_Et
] = [-3.27707; 6.1004; 1.41841] m
Et_Origin1 := [
    Plant_Origin[0] - L_Sed + L_Et;
    Floc_Origin[1] + (N_FlocChannels*(W_FlocChannel + T_PlantWall)) + W_EtWalkway + T_PlantWall;
    Z_Et
] = [-3.27707; 6.1004; 1.41841] m
Et_Origin :=
    Et_Origin0 if EN_EtGrit == 0
    Et_Origin1 otherwise
Et_Dim := [L_Et; W_Et; H_Et + DropEt] = [4.2398; 1.23818; 1.13375] m
EtHopper_Origin := [
    Et_Origin[0] - S_Fitting - ConRadius(ND_EtDrain) - L_EtHopper/2 - T_EtHopperLedge;
    Et_Origin[1] + W_Et;
    Et_Origin[2]
] = [-4.46242; 7.33857; 1.41841] m
Hopper_FarCorner := [Et_Origin[0] - L_EtHopper - T_EtHopperLedge; Et_Origin[1]; Z_EtHopper] = [-5.29617; 6.1004; 2.25216] m
# Use two inlet back far corner for first hopper and original for last two hoppers
HopperBack_FarCorner := [Et_Origin[0] - L_EtHopperBack; Et_Origin[1] + L_Et + W_Et; Et_Origin[2] + H_EtHopperBack] = [-3.91364; 11.5784; 2.05498] m
HopperBack_FarCornerTwoInlet := [
    Et_Origin[0] - L_EtHopperBack + (2*S_Fitting + T_EtRemovableWall + 2*T_EtRemovableWallSupport + 2*ConRadius(ND_EtDrain));
    Et_Origin[1] + L_Et + W_Et;
    Et_Origin[2] + H_EtHopperBack
] = [-3.56204; 11.5784; 2.05498] m
HopperFront_FarCorner := [Et_Origin[0] + L_EtHopperFront; Et_Origin[1] + L_Et; Et_Origin[2] + H_EtHopperFront] = [-2.87707; 10.3402; 1.81841] m
□ := Et_Origin + [-L_EtDC; L_EtHopperFront; -T_PlantWall]  # error: This placeholder is empty.  # EtDC_originandy
EtDividingWall_Origin := Et_Origin + [0 m; (L_EtHopperFront + 2*S_Fitting + 2*ConRadius(ND_EtDrain) + T_EtRemovableWallSupport); 0 m]
EtDividingWallSupportL_Origin := EtDividingWall_Origin + [0 m; (T_EtRemovableWall + T_EtRemovableWallSupport)/2; 0 m]
# Set both origins for support walls on opposite sides of the removable wall
EtDividingWallSupportR_Origin := EtDividingWall_Origin + [0 m; -(T_EtRemovableWall + T_EtRemovableWallSupport)/2; 0 m]
# Hoppers and tank walls
EntTankLayer := layer_new("EtCon", grey)
EtHopper := WedgeF(EtHopper_Origin, Hopper_FarCorner, [0; 0; 0]*deg)
MirrorEtHopper := MirrorLast([EtHopper_Origin[0] + T_EtHopperLedge/2; EtHopper_Origin[1]], [EtHopper_Origin[0] + T_EtHopperLedge/2; EtHopper_Origin[1] + zc], "n")
EtHopperLedge := BoxF(EtHopper_Origin, EtHopper_Origin + [T_EtHopperLedge; -W_Et; H_EtHopper], [0; 0; 0]*deg)
ArrayEtHoppers := array_all(1, N_EtFullHopper + 1, -L_EtHopper - T_EtHopperLedge)
# Have to change this or the hopper back far corner
# Incorporate 2 molds
# Make two wedges
EtHopperBack :=
    WedgeF(Et_Origin + [0; W_Et; 0], HopperBack_FarCornerTwoInlet, [90; 0; 0]*deg) if EN_TwoInlets == 1
    WedgeF(Et_Origin + [0; W_Et; 0], HopperBack_FarCorner, [90; 0; 0]*deg) otherwise
ConRadius(ND_EtDrain) - S_Fitting - T_EtHopperLedge
[Et_Origin[0] - L_EtHopperBack; Et_Origin[1] + L_Et + W_Et; Et_Origin[2] + H_EtHopperBack]
EtHopperBack2 := WedgeF(Et_Origin + [-L_EtHopper/2 - T_EtHopperLedge; W_Et; 0], HopperBack_FarCorner + [-W_Et/2; -L_EtHopper/2; 0 m], [90; 0; 0]*deg)
Et_HopperBack :=
    EtHopperBack if EN_TwoInlets == 1
    EtHopperBack otherwise
EtHopperFront := WedgeF(Et_Origin, HopperFront_FarCorner, [90; 0; 0]*deg)
EntTank := Tank(Et_Origin, Et_Dim, T_PlantWall)
EtDividingWallSupportL := BoxF(EtDividingWallSupportL_Origin, EtDividingWallSupportL_Origin + [
    -L_EtHopper/2 - ConRadius(ND_EtDrain) - S_Fitting;
    T_EtRemovableWallSupport;
    H_EtRemovableWallSupport
], [0; 0; 0]*deg)
EtDividingWallSupportR := BoxF(EtDividingWallSupportR_Origin, EtDividingWallSupportR_Origin + [
    -L_EtHopper/2 - ConRadius(ND_EtDrain) - S_Fitting;
    T_EtRemovableWallSupport;
    H_EtRemovableWallSupport
], [0; 0; 0]*deg)
EtDividingWallSupportWedgeR := WedgeF(EtDividingWallSupportR_Origin + [-L_EtHopper/2 - ConRadius(ND_EtDrain) - S_Fitting; 0 m; H_EtRemovableWallSupport], EtDividingWallSupportR_Origin + [
    -2*ConRadius(ND_EtDrain) - 2*S_Fitting;
    T_EtRemovableWallSupport;
    H_EtHopper + H_EtRemovableWallSupport
], [0; 0; 0]*deg)
EtDividingWallSupportWedgeL := WedgeF(EtDividingWallSupportL_Origin + [-L_EtHopper/2 - ConRadius(ND_EtDrain) - S_Fitting; 0 m; H_EtRemovableWallSupport], EtDividingWallSupportL_Origin + [
    -2*ConRadius(ND_EtDrain) - 2*S_Fitting;
    T_EtRemovableWallSupport;
    H_EtHopper + H_EtRemovableWallSupport
], [0; 0; 0]*deg)
SubtractDividingWallSupport := SubtractF(["EtCon"], "DeleteMe")
EntDividingWallSupport := stack(EtDividingWallSupportL, EtDividingWallSupportR, EtDividingWallSupportWedgeR, EtDividingWallSupportWedgeL)
# Drain channel
EtDC := DrainChannelF(EtDC_Origin + [0 m; W_EtDC; 0 m], [180; 0; 0]*deg, Q_EtDCMax, W_EtDC, H_EtDC, L_EtDC, 1 %, Nu_Water, E_Concrete, 1)
FreezeEntTank := FreezeLayer("EtCon")
# Trash rack slots
TrashRackSlot1 := BoxF(EtHopper_Origin + [T_EtHopperLedge/2 - T_ConcreteMin/2; 2*D_Rebar; H_EtHopper - 2*D_Rebar], EtHopper_Origin + [
    T_EtHopperLedge/2 - T_ConcreteMin/2 - 2*D_Rebar;
    -W_Et - 2*D_Rebar;
    H_EtHopper + H_EtTop + H_PlantFreeboard + zc
], [0; 0; 0]*deg)
TrashRackSlot2 := BoxF(EtHopper_Origin + [T_EtHopperLedge/2 + T_ConcreteMin/2; 2*D_Rebar; H_EtHopper - 2*D_Rebar], EtHopper_Origin + [
    T_EtHopperLedge/2 + T_ConcreteMin/2 + 2*D_Rebar;
    -W_Et - 2*D_Rebar;
    H_EtHopper + H_EtTop + H_PlantFreeboard + zc
], [0; 0; 0]*deg)
SubtractTrashRackSlots := SubtractF(["EtCon"], "DeleteMe")
# Removable Wall
EtRemovableLayer := layer_new("EtRemovWall", ltgrey)
EtDividingWall := BoxF(EtDividingWall_Origin, EtDividingWall_Origin + [-L_EtHopper/2 - ConRadius(ND_EtDrain) - S_Fitting; T_EtRemovableWall; H_Et + DropEt], [0; 0; 0]*deg)
FreezeEntRemovable := FreezeLayer("EtRemovWall")
DividingWallWedge := WedgeF(EtDividingWall_Origin + [-L_EtHopper/2 - ConRadius(ND_EtDrain) - S_Fitting; 0 m; 0 m], EtDividingWall_Origin + [-2*S_Fitting - 2*ConRadius(ND_EtDrain); T_EtRemovableWall; H_EtHopper], [0; 0; 0]*deg)
SubtractDividingWallWedge := SubtractF(["EtRemovWall"], "DeleteMe")
RemovableWall := stack(EtRemovableLayer, EtDividingWall, FreezeEntRemovable, DividingWallWedge, GroupDelete, SubtractDividingWallWedge, FreezeEntRemovable)
EtTankScript2 := stack(EntTankLayer, EtHopper, MirrorEtHopper, EtHopperLedge, ArrayEtHoppers, EtHopperBack, EtHopperBack2, EtHopperFront, EntTank, EntDividingWallSupport, EtDC, Union_All, FreezeEntTank, RemovableWall, TrashRackSlot1, TrashRackSlot2, GroupDelete, SubtractTrashRackSlots)
# Concrete Modifications for Double Train
ModificationsLayer := layer_new("EtExtensions", grey)
# LFOM channel origin is defined above. It comes before channel 2.
W_DCWalkway + 3*T_PlantWall + L_LfomChannel
LfomChannel2_Origin := [
    LfomChannel_Origin[0] - L_LfomChannel - 2*T_ChannelWall - W_DCWalkway;
    LfomChannel_Origin[1];
    Floc_Origin[2]
] = [-6.78912; 6.2504; 0] m
LfomChannel2_Dim := [L_LfomChannel; W_LfomChannel; H_LfomChannel + Z_LfomChannelBottom]
# Draw 2, not original!
LfomChannel2 := Tank(LfomChannel2_Origin, LfomChannel2_Dim, T_ChannelWall)
RMChannel2_Origin := LfomChannel2_Origin + [-T_ChannelWall - W_RMChannel; T_ChannelWall; -T_ChannelWall] = [-7.43912; 6.4004; -0.15] m
RMChannel2 := BoxF(RMChannel2_Origin, RMChannel2_Origin + [
    -W_RMChannel - 2*T_ChannelWall;
    L_RMChannel + 2*T_ChannelWall + T_PlantWall;
    H_RMChannel + 2*T_ChannelWall
], [180; 0; 0]*deg)
# This is that big weird box that needs to be adjusted!
EndFill := BoxF([
    Et_Origin[0] - L_EtHopper*(N_EtFullHopper + (AddHopper - 2)) - L_EtHopper/2 - T_PlantWall*(N_EtFullHopper + (AddHopper - 2));
    Et_Origin[1] + W_LfomChannel + T_ChannelWall;
    Et_Origin[2]
], [
    Et_Origin[0] - Et_Dim[0];
    Et_Origin[1] + W_Et;
    Et_Origin[2] + H_Et - (HL_Lfom + H_PlantFreeboard + T_ConcreteMin)
], [0; 0; 0]*deg)
FreezeModifications := FreezeLayer("EtExtensions")
LfomChannelSubtraction := BoxF([LfomChannel2_Origin[0] - L_LfomChannel; LfomChannel2_Origin[1]; LfomChannel2_Origin[2]], [LfomChannel2_Origin[0]; LfomChannel2_Origin[1]; LfomChannel2_Origin[2]] + [0 m; W_LfomChannel; (LfomChannel2_Dim[2] - H_Et) + T_PlantWall], [0; 0; 0]*deg)
LfomSheetSubtraction2 := BoxF([
    LfomChannel2_Origin[0] - T_ConcreteMin;
    LfomChannel2_Origin[1] + W_LfomChannel;
    LfomChannel2_Origin[2] + H_LfomChannel - (HL_Lfom + H_PlantFreeboard + T_ConcreteMin)
], [
    LfomChannel2_Origin[0] - L_LfomChannel + T_ConcreteMin;
    LfomChannel2_Origin[1] + W_LfomChannel + T_ChannelWall;
    LfomChannel2_Origin[2] + H_LfomChannel
], [0; 0; 0]*deg)
RMSubtraction2 := BoxF(RMChannel2_Origin + [T_ChannelWall; 0 m; T_ChannelWall], RMChannel2_Origin + [
    -W_RMChannel + T_ChannelWall;
    L_RMChannel + 2*T_ChannelWall + T_PlantWall;
    H_RMChannel + T_ChannelWall
], [180; 0; 0]*deg)
# GroupDelete
ModificationSubtractions := SubtractF(["Etcon"; "EtExtensions"], "DeleteMe")
# EndFill | Taken out!
ModificationScript := stack(ModificationsLayer, LfomChannel2, RMChannel2, FreezeModifications, LfomChannelSubtraction, LfomSheetSubtraction2, RMSubtraction2, GroupDelete, ModificationSubtractions)
# Trash Rack
TRLayer := layer_new("EtTrashrack", yellow)
HorizCylinder := CylinderF(EtHopper_Origin + [T_EtHopperLedge/2 - T_ConcreteMin/2 - D_Rebar/2; 2*D_Rebar; H_EtHopper - 3/2*D_Rebar], D_Rebar/2, W_Et + 4*D_Rebar, [90; 0]*deg)
ViewRight := view("r")
ArrayHorizCylinder := ArrayLast(N_TRSpacesH + 1, 1, B_EtRebar)
ViewTop := view("t")
VertCylinder :=
    CylinderF(EtHopper_Origin + [T_EtHopperLedge/2 - T_ConcreteMin/2 - 3*D_Rebar/2; 3/2*D_Rebar; H_EtHopper - 2*D_Rebar], D_Rebar/2, (N_TRSpacesH + 1)*B_EtRebar - D_Rebar, [0; 90]*deg) if EN_DoubleTrain == 0
    otherwise
        CylinderF(EtHopper_Origin + [
            T_EtHopperLedge/2 - T_ConcreteMin/2 - 3*D_Rebar/2;
            3/2*D_Rebar;
            H_EtHopper - 2*D_Rebar - (H_EtHopper - (H_Et + DropEt - (HL_Lfom + H_PlantFreeboard + T_ConcreteMin)))
        ], D_Rebar/2, HL_Lfom + H_PlantFreeboard + T_ConcreteMin - zc, [0; 90]*deg)
ArrayVertCyl := ArrayLast(1, N_TRSpacesV + 1, -B_EtRebar)
ArrayAll := array_all(1, 2, T_ConcreteMin + 2*D_Rebar)
Freeze := FreezeLayer("EtTrashrack")
EtTrashRackScript := stack(TRLayer, HorizCylinder, ViewRight, ArrayHorizCylinder, ViewTop, VertCylinder, ViewRight, ArrayVertCyl, ViewTop, ArrayAll, Freeze)
# Rapid Mix Pipe, LFOM, and Orifice Plate
# this is the upper elbow (connected to the LFOM)
RMElbow_Origin0 := [
    Plant_Origin[0] - L_Sed + S_Fitting + ConRadius(ND_RMPipe);
    Et_Origin[1] + W_Et - S_Fitting - ConRadius(ND_RMPipe) - ElbowRadius(ND_RMPipe);
    FlocCoupling_Origin[2]
]
RMElbow_Origin1 := [
    Plant_Origin[0] - L_Sed + S_Fitting + ConRadius(ND_RMPipe);
    Et_Origin[1] + W_Et - 2*S_Fitting - ConRadius(ND_RMPipe) - ElbowRadius(ND_RMPipe) - 2*ConRadius(ND_EtOverflowDrain);
    FlocCoupling_Origin[2]
]
RMElbow_Origin :=
    RMElbow_Origin0 if EN_EtGrit == 0
    RMElbow_Origin1 otherwise
    = [-7.31685; 6.89726; 0.186525] m
RMAirRelease_Origin := [
    RMElbow_Origin[0];
    Floc_Origin[1] + (N_FlocChannels*(W_FlocChannel + T_FlocChannelWall)) + T_PlantWall - T_FlocChannelWall + S_Fitting;
    FlocCoupling_Origin[2] + innerdiameter(ND_RMPipe, PS_Default)/2 - zc
]
L_RMPipeHoriz := (Et_Origin[1] + W_Et - S_Fitting - ConRadius(ND_RMPipe) - ElbowRadius(ND_RMPipe)) - (Floc_Origin[1] + N_FlocChannels*W_FlocChannel + (N_FlocChannels - 1)*T_FlocChannelWall - L_FlocCouplingExt + CouplingLength(ND_RMPipe) - SocketDepth(ND_RMPipe)) = 2.01224 m
L_RMPipeVert := Z_EtTop - (RMElbow_Origin[2] + ElbowRadius(ND_RMPipe)) = 2.12433 m
L_RMAirRelease := Floc_Origin[2] + H_Floc - (FlocCoupling_Origin[2] + innerdiameter(ND_RMPipe, PS_Default)/2 - zc)
# RM Elbow
RMElbowLayer := layer_new("EtRmElbowPlu", green)
RMElbow := ElbowSUBF(RMElbow_Origin, [0; 90; 0]*deg, ND_RMPipe, PS_Default, ["EtCon"])
FreezeRMElbow := FreezeLayer("EtRmElbowPlu")
# RM Pipes
RMPipeLayer := layer_new("EtRmPipePlu", blue)
RMVertPipe := PipeSUBF([
    RMElbow_Origin[0];
    RMElbow_Origin[1] + ElbowRadius(ND_RMPipe);
    RMElbow_Origin[2] + ElbowRadius(ND_RMPipe)
], L_RMPipeVert, [0; 90; 0]*deg, ND_RMPipe, PS_Default, ["EtCon"])
RMHorizPipe := PipeF(RMElbow_Origin, L_RMPipeHoriz, [90; 0; 0]*deg, ND_RMPipe, PS_Default)
RMAirRelease := PipeF(RMAirRelease_Origin, L_RMAirRelease, [0; 90; 0]*deg, ND_RMAirRelease, PS_Default)
# Taken out of drawing. This tube was too small to effectively release air bubbles; the air will just leave in the first floc canal. change made 10/27/14 by mrf222
RMAirReleaseHole := CylinderF([RMAirRelease_Origin[0]; RMAirRelease_Origin[1]; FlocCoupling_Origin[2]], outerradius(ND_RMAirRelease), outerradius(ND_RMPipe) + zc, [0; 90; 0]*deg)
FreezeRMPipe := FreezeLayer("EtRmPipePlu")
SelectRMPipes := SelectLayer("EtRmPipePlu")
# LFOM Orifices
LFOM_Origin0 := [RMElbow_Origin[0]; RMElbow_Origin[1] + ElbowRadius(ND_RMPipe); ZW_Et - HL_Flowmeasure]
LFOM_Origin1 := [RMElbow_Origin[0]; RMElbow_Origin[1] + ElbowRadius(ND_RMPipe); ZW_Et - HL_Flowmeasure]
LFOM_Origin :=
    LFOM_Origin0 if EN_EtGrit == 0
    LFOM_Origin1 otherwise
LfomOrifices :=
    Local ← FreezeRMPipe
    for h ∈ 0 .. last(H_LfomOrifices)
        if N_LfomOrifices[h] ≠ 0
            Local ← stack(Local, CylinderF([LFOM_Origin[0]; LFOM_Origin[1]; LFOM_Origin[2] + H_LfomOrifices[h]], D_LfomOrifices/2, outerradius(ND_RMPipe) + zc, [
                90 deg + (asin(0.5*S_LfomOrificesMin/(2*outerradius(ND_RMPipe))) + asin(D_LfomOrifices/(2*outerradius(ND_RMPipe))))*(mod(h, 2) == 0);
                0 deg
            ]))
        Local ← stack(Local, ArrayLastPolar([LFOM_Origin[0]; LFOM_Origin[1]; LFOM_Origin[2] + H_LfomOrifices[h]], N_LfomOrifices[h], (N_LfomOrifices[h] - 1)*(2*asin(D_LfomOrifices/(2*outerradius(ND_RMPipe))) + 2*asin(S_LfomOrificesMin/(2*outerradius(ND_RMPipe)))))) if N_LfomOrifices[h] > 1
    return Local
SubtractRMPipeOrifices := SubtractF(["EtRmPipePlu"], "DeleteMe")
RMScript := stack(RMElbowLayer, RMElbow, FreezeRMElbow, RMPipeLayer, RMVertPipe, RMHorizPipe, FreezeRMPipe, GroupDelete, SubtractRMPipeOrifices, SelectRMPipes, LfomOrifices, GroupDelete, SubtractRMPipeOrifices)
# High Flow LFOM Sheet and Channel
EtConLayer := SelectLayer("EtCon")
W_DCWalkway + 3*T_PlantWall + L_LfomChannel
LfomChannel_Dim := [L_LfomChannel; W_LfomChannel; H_LfomChannel + Z_LfomChannelBottom] = [0.57775; 0.5; 2.6185] m
RMChannel_Origin := [
    Et_Origin[0] - L_Et + W_DCWalkway + 3*T_PlantWall + L_LfomChannel + W_RMChannel;
    Et_Origin[1] - T_PlantWall - L_RMChannel + T_LfomChannelWall;
    Floc_Origin[2]
] = [-4.98912; 5.1004; 0] m
RMChannel_Dim := [W_RMChannel; L_RMChannel; H_RMChannel] = [0.5; 1; 0.5] m
LfomSheet_Dim := [-L_LfomChannel; T_LfomSheet; HL_Lfom + H_PlantFreeboard + T_ConcreteMin]
LfomSheet_Origin := [
    LfomChannel_Origin[0];
    LfomChannel_Origin[1] + W_LfomChannel + 0.5*(T_ChannelWall - T_LfomSheet);
    Z_EtTop - LfomSheet_Dim[2]
] = [-4.91137; 6.8004; 2.20216] m
LfomChannel := Tank(LfomChannel_Origin, LfomChannel_Dim, T_ChannelWall)
LfomChannelFill := BoxF(LfomChannel_Origin + [T_ChannelWall; 0 m; 0 m], LfomChannel_Origin + [-L_LfomChannel; W_LfomChannel + T_ChannelWall; -H_Et + H_LfomChannel], [0; 0; 0]*deg)
RMChannel := Tank(RMChannel_Origin, RMChannel_Dim, T_ChannelWall)
RMChannelTop := BoxF(RMChannel_Origin + [T_LfomChannelWall; -T_LfomChannelWall; H_RMChannel], RMChannel_Origin + [-W_RMChannel - T_LfomChannelWall; L_RMChannel + T_LfomChannelWall; H_RMChannel + T_LfomChannelWall], [0; 0; 0]*deg)
FreezeEtcon := FreezeLayer("EtCon")
RMChannelSubtraction := BoxF(RMChannel_Origin, RMChannel_Origin + [-W_RMChannel; -T_LfomChannelWall; H_RMChannel], [0; 0; 0]*deg)
ChannelSubtraction := BoxF(LfomChannel_Origin + [-L_LfomChannel; 0 m; 0 m], LfomChannel_Origin + [-L_LfomChannel + W_RMChannel; -T_PlantWall; H_RMChannel], [0; 0; 0]*deg)
SlopeSubtraction := BoxF(LfomChannel_Origin, LfomChannel_Origin + [-L_LfomChannel; W_LfomChannel; LfomChannel_Dim[2]], [0; 0; 0]*deg)
SlopeSubtraction2 := BoxF(LfomChannel2_Origin, LfomChannel2_Origin + [-L_LfomChannel; W_LfomChannel; LfomChannel2_Dim[2]], [0; 0; 0]*deg)
LfomSheetSubtraction := BoxF([LfomChannel_Origin[0] - T_ConcreteMin; LfomChannel_Origin[1] + W_LfomChannel; LfomSheet_Origin[2]], [
    LfomChannel_Origin[0] - L_LfomChannel + T_ConcreteMin;
    LfomChannel_Origin[1] + W_LfomChannel + T_ChannelWall;
    LfomChannel_Origin[2] + LfomChannel_Dim[2]
], [0; 0; 0]*deg)
LfomSheetSlotSubtraction := BoxF([
    LfomChannel_Origin[0];
    LfomChannel_Origin[1] + W_LfomChannel + 0.5*(T_ChannelWall - T_LfomSheet);
    LfomSheet_Origin[2]
], LfomChannel_Origin + [-L_LfomChannel; W_LfomChannel + 0.5*(T_ChannelWall + T_LfomSheet); LfomChannel_Dim[2]], [0; 0; 0]*deg)
LfomChannelOrificeSheetSubtraction := BoxF([
    LfomChannel_Origin[0] + T_LfomSheet;
    LfomChannel_Origin[1];
    LfomChannel_Origin[2] + Z_LfomChannelOrifice
], [
    LfomChannel_Origin[0] - T_LfomSheet - L_LfomChannel;
    LfomChannel_Origin[1] + W_LfomChannel;
    LfomChannel_Origin[2] + T_LfomSheet + Z_LfomChannelOrifice
], [0; 0; 0]*deg)
# GroupDelete
ChannelSubtractions := SubtractF(["EtCon"], "DeleteMe")
LfomSheetLayer := layer_new("EtLfomSheet", ltpurple)
LfomSheet := BoxF(LfomSheet_Origin, LfomSheet_Origin + LfomSheet_Dim, [0; 0; 0]*deg)
LfomChannelSheet := BoxF([
    LfomChannel_Origin[0] + T_LfomSheet;
    LfomChannel_Origin[1];
    LfomChannel_Origin[2] + Z_LfomChannelOrifice
], [
    LfomChannel_Origin[0] - T_LfomSheet - L_LfomChannel;
    LfomChannel_Origin[1] + W_LfomChannel;
    LfomChannel_Origin[2] + T_LfomSheet + Z_LfomChannelOrifice
], [0; 0; 0]*deg)
FrzLfomSheetLayer := FreezeLayer("EtLfomSheet")
LfomOrifices :=
    Local ← FrzLfomSheetLayer
    for h ∈ 0 .. last(H_LfomOrifices)
        if N_LfomOrifices[h] ≠ 0
            Local ← stack(Local, CylinderF([
                (LfomSheet_Origin[0] - T_ConcreteMin - 0.5*(D_LfomOrifices + S_LfomOrificesMin)) - 0.5*(S_LfomOrificesMin + D_LfomOrifices)*(mod(h, 2) == 0);
                LfomSheet_Origin[1];
                Z_LfomChannelBottom + T_ConcreteMin + HW_LfomChannel + H_Freefall + H_LfomOrifices[h]
            ], D_LfomOrifices/2, T_LfomSheet + zc, [-90; 0]*deg))
        Local ← stack(Local, ArrayLast(1, N_LfomOrifices[h], -(D_LfomOrifices + S_LfomOrificesMin))) if N_LfomOrifices[h] > 1
    return Local
LfomChannelOrifice := CylinderF([
    LfomChannel_Origin[0] - L_LfomChannel/2;
    LfomChannel_Origin[1] + W_LfomChannel/2;
    LfomChannel_Origin[2] + Z_LfomChannelOrifice
], D_LfomChannelOrifice/2, T_LfomSheet + zc, [0; 0]*deg)
RotateOrifice := Rotate3DLast([
    LfomChannel_Origin[0] - L_LfomChannel/2;
    LfomChannel_Origin[1] + W_LfomChannel/2;
    LfomChannel_Origin[2] + Z_LfomChannelOrifice
], "y", 90 deg)
# GroupDelete
SubtractLfomOrifices := SubtractF(["EtLfomSheet"], "DeleteMe")
ThawSheets := ThawMultiple(["EtLfomSheet"])
MirrorSheets := Mirror3dAll("YZ", [
    Et_Origin[0] - L_Et + W_DCWalkway + 3*T_PlantWall + L_LfomChannel - 1/2*W_DCWalkway - T_PlantWall;
    0 m;
    0 m
], "N")
FreezeSheets := FreezeMultiple(["EtLfomSheet"])
LfomChannelScript := stack(EtConLayer, LfomChannel, LfomChannelFill, RMChannel, RMChannelTop, FreezeEtcon, RMChannelSubtraction, ChannelSubtraction, SlopeSubtraction, SlopeSubtraction2, LfomSheetSubtraction, LfomSheetSlotSubtraction, LfomChannelOrificeSheetSubtraction, GroupDelete, ChannelSubtractions, LfomSheetLayer, LfomSheet, LfomChannelSheet, LfomOrifices, LfomChannelOrifice, RotateOrifice, GroupDelete, SubtractLfomOrifices, ThawSheets, MirrorSheets, FreezeSheets)
# Need to not draw the original LFOM channel!
# Hopper Drains
DrainCouplingLayer := layer_new("EtDrainCouplingsPlu", green)
ConRadius(ND_EtDrain) + S_Fitting + L_EtHopperFront
DrainWeirCoupling := CouplingSUBF([
    -S_Fitting - ConRadius(ND_EtDrain);
    {
        (ConRadius(ND_EtDrain) + S_Fitting + L_EtHopperFront) if EN_DoubleTrain == 0
        (ConRadius(ND_EtDrain) + S_Fitting + 1/2*W_Et - T_ChannelWall + T_ConcreteMin) otherwise
    };
    -SocketDepth(ND_EtDrain)
] + Et_Origin, [0; 270]*deg, ND_EtDrain, PS_Default, ["EtCon"])
DrainCouplings :=
    Local ← stack(DrainCouplingLayer, DrainWeirCoupling)
    for i ∈ 0 .. (N_EtFullHopper + {
    (AddHopper - 2) if EN_DoubleTrain == 1
    1 otherwise
})
        Local ← stack(Local, CouplingSUBF([
            -(L_EtHopper + T_EtHopperLedge)*i - S_Fitting - ConRadius(ND_EtDrain);
            {
                (ConRadius(ND_EtDrain) + S_Fitting + L_EtHopperFront) if EN_DoubleTrain == 0
                (ConRadius(ND_EtDrain) + S_Fitting + 1/2*W_Et - T_ChannelWall + T_ConcreteMin) otherwise
            };
            -SocketDepth(ND_EtDrain)
        ] + Et_Origin, [0; 270]*deg, ND_EtDrain, PS_Default, ["EtCon"]))
FreezeDrainCouplings := FreezeLayer("EtDrainCouplingsPlu")
DrainPipeLayer := layer_new("EtDrainPipesPlu", blue)
DrainPipes :=
    Local ← stack(FreezeDrainCouplings, DrainPipeLayer)
    for i ∈ 0 .. N_EtFullHopper + {
    (AddHopper - 2) if EN_DoubleTrain == 1
    1 otherwise
}
        Local ← stack(Local, PipeSUBF([
            -(L_EtHopper + T_EtHopperLedge)*i - S_Fitting - ConRadius(ND_EtDrain);
            {
                (ConRadius(ND_EtDrain) + S_Fitting + L_EtHopperFront) if EN_DoubleTrain == 0
                (ConRadius(ND_EtDrain) + S_Fitting + .5*W_Et - T_ChannelWall + T_ConcreteMin) otherwise
            };
            SocketDepth(ND_EtDrain) - CouplingLength(ND_EtDrain)
        ] + Et_Origin, T_PlantWall, [0; 270; 0]*deg, ND_EtDrain, PS_Default, ["EtCon"]))
FreezePipes := FreezeLayer("EtDrainPipesPlu")
StopperLayer := layer_new("EtDrainStoppersPlu", red)
# Added 10/17/2014 by mrf222 at the request of Drew
EasyToGrab := 20 cm
L_EtDrainStopper := H_Et + DropEt + SocketDepth(ND_EtDrain) + EasyToGrab
FirstStopper := PipeF([
    -S_Fitting - ConRadius(ND_EtDrain);
    {
        (ConRadius(ND_EtDrain) + S_Fitting + L_EtHopperFront) if EN_DoubleTrain == 0
        (ConRadius(ND_EtDrain) + S_Fitting + .5*W_Et - T_ChannelWall + T_ConcreteMin) otherwise
    };
    -SocketDepth(ND_EtDrain)
] + Et_Origin, L_EtDrainStopper, [0; 90; 0]*deg, ND_EtDrain, PS_Default)
StopperPipes :=
    Local ← stack(FreezePipes, StopperLayer)
    for i ∈ 0 .. N_EtFullHopper + {
    (AddHopper - 2) if EN_DoubleTrain == 1
    1 otherwise
}
        Local ← stack(Local, PipeF([
            -(L_EtHopper + T_EtHopperLedge)*i - S_Fitting - ConRadius(ND_EtDrain);
            {
                (ConRadius(ND_EtDrain) + S_Fitting + L_EtHopperFront) if EN_DoubleTrain == 0
                (ConRadius(ND_EtDrain) + S_Fitting + .5*W_Et - T_ChannelWall + T_ConcreteMin) otherwise
            };
            -SocketDepth(ND_EtDrain)
        ] + Et_Origin, L_EtDrainStopper, [0; 90; 0]*deg, ND_EtDrain, PS_Default))
FreezeStopper := FreezeLayer("EtDrainStoppersPlu")
EtDrainsRight := stack(DrainCouplings, DrainPipes, StopperPipes, FreezeStopper)
ThawDrains := ThawMultiple(["EtCon"; "EtDrainCouplingsPlu"; "EtDrainPipesPlu"; "EtWeir"; "EtTrashrack"; "Cdc"; "CdcFittings"; "EtDrainStoppersPlu"])
MirrorDrains := Mirror3dAll("YZ", [Plant_Origin[0] - 1/2*L_Sed; 0 m; 0 m], "Y")
FreezeDrains := FreezeMultiple(["EtCon"; "EtDrainCouplingsPlu"; "EtDrainPipesPlu"; "EtWeir"; "EtTrashrack"; "Cdc"; "CdcFittings"; "EtDrainStoppersPlu"])
EtDrainsLeft := stack(ThawDrains, MirrorDrains, FreezeDrains)
# Hopper Drains Two Inlets
# The way our change works is we have functions to mirror the drains. This originally included a i = 0
# section for the first hopper drain piece, but this was taken out for the three areas (Drain Coupling, Pipe, and stopper.
#
# Then I added this first part in before the full stack function to create two pieces (two drains, two couplings, to stoppers) in the first hopper. Making them independent of the mirror function allows us to change their location easily without modifying the rest.
DrainCouplingLayer := layer_new("EtDrainCouplingsPlu", green)
DrainWeirCoupling := CouplingSUBF([
    (-S_Fitting - ConRadius(ND_EtDrain));
    ConRadius(ND_EtDrain) + S_Fitting + L_EtHopperFront;
    -SocketDepth(ND_EtDrain)
] + Et_Origin, [0; 270]*deg, ND_EtDrain, PS_Default, ["EtCon"])
DrainWeirCoupling_1 := CouplingSUBF([
    (-S_Fitting - ConRadius(ND_EtDrain));
    ConRadius(ND_EtDrain) + S_Fitting + L_EtHopperFront + 2*ConRadius(ND_EtDrain) + S_Fitting + (2*T_EtRemovableWallSupport + T_EtRemovableWall + S_Fitting);
    -SocketDepth(ND_EtDrain)
] + Et_Origin, [0; 270]*deg, ND_EtDrain, PS_Default, ["EtCon"])
DrainCouplings :=
    Local ← stack(DrainCouplingLayer, DrainWeirCoupling, DrainWeirCoupling_1)
    for i ∈ 1 .. (N_EtFullHopper + 1)
        Local ← stack(Local, CouplingSUBF([
            -(L_EtHopper + T_EtHopperLedge)*i - S_Fitting - ConRadius(ND_EtDrain);
            ConRadius(ND_EtDrain) + S_Fitting + L_EtHopperFront;
            -SocketDepth(ND_EtDrain)
        ] + Et_Origin, [0; 270]*deg, ND_EtDrain, PS_Default, ["EtCon"]))
# Stacks both couplings in first
# hopper and adds row of the rest
# of the hoppers
# I added Drain Weir Coupling.1
# Started i at 1 instead of 0. 0 is
# Covered in Drain weir Coupling
FreezeDrainCouplings := FreezeLayer("EtDrainCouplingsPlu")
DrainPipeLayer := layer_new("EtDrainPipesPlu", blue)
# Created two
# Drain SUBF's
DrainPipe_0 := PipeSUBF([
    -S_Fitting - ConRadius(ND_EtDrain);
    ConRadius(ND_EtDrain) + S_Fitting + L_EtHopperFront;
    SocketDepth(ND_EtDrain) - CouplingLength(ND_EtDrain)
] + Et_Origin, T_PlantWall, [0; 270; 0]*deg, ND_EtDrain, PS_Default, ["EtCon"])
DrainPipe_1 := PipeSUBF([
    -S_Fitting - ConRadius(ND_EtDrain);
    ConRadius(ND_EtDrain) + S_Fitting + L_EtHopperFront + (2*ConRadius(ND_EtDrain) + S_Fitting) + (2*T_EtRemovableWallSupport + T_EtRemovableWall + S_Fitting);
    SocketDepth(ND_EtDrain) - CouplingLength(ND_EtDrain)
] + Et_Origin, T_PlantWall, [0; 270; 0]*deg, ND_EtDrain, PS_Default, ["EtCon"])
DrainPipes :=
    Local ← stack(FreezeDrainCouplings, DrainPipeLayer, DrainPipe_0, DrainPipe_1)
    for i ∈ 1 .. N_EtFullHopper + 1
        Local ← stack(Local, PipeSUBF([
            -(L_EtHopper + T_EtHopperLedge)*i - S_Fitting - ConRadius(ND_EtDrain);
            ConRadius(ND_EtDrain) + S_Fitting + L_EtHopperFront;
            SocketDepth(ND_EtDrain) - CouplingLength(ND_EtDrain)
        ] + Et_Origin, T_PlantWall, [0; 270; 0]*deg, ND_EtDrain, PS_Default, ["EtCon"]))
# Added in first two pipes to local
# Changed i to 1 from 0
FreezePipes := FreezeLayer("EtDrainPipesPlu")
StopperLayer := layer_new("EtDrainStoppersPlu", red)
L_EtDrainStopper := H_Et - H_PlantFreeboard/2 + SocketDepth(ND_EtDrain)
FirstStopper_0 := PipeF([
    (-S_Fitting - ConRadius(ND_EtDrain));
    ConRadius(ND_EtDrain) + S_Fitting + L_EtHopperFront;
    -SocketDepth(ND_EtDrain)
] + Et_Origin, L_EtDrainStopper, [0; 90; 0]*deg, ND_EtDrain, PS_Default)
# Two New functions
# taken from StopperPipes
# Function for first two
# stoppers
FirstStopper_1 := PipeF([
    (-S_Fitting - ConRadius(ND_EtDrain));
    ConRadius(ND_EtDrain) + S_Fitting + L_EtHopperFront + (2*ConRadius(ND_EtDrain) + S_Fitting) + (2*T_EtRemovableWallSupport + T_EtRemovableWall + S_Fitting);
    -SocketDepth(ND_EtDrain)
] + Et_Origin, L_EtDrainStopper, [0; 90; 0]*deg, ND_EtDrain, PS_Default)
# Changed i to 1
# added to layer
StopperPipes :=
    Local ← stack(FreezePipes, StopperLayer, FirstStopper_0, FirstStopper_1)
    for i ∈ 1 .. N_EtFullHopper + 1
        Local ← stack(Local, PipeF([
            -(L_EtHopper + T_EtHopperLedge)*i - S_Fitting - ConRadius(ND_EtDrain);
            ConRadius(ND_EtDrain) + S_Fitting + L_EtHopperFront;
            -SocketDepth(ND_EtDrain)
        ] + Et_Origin, L_EtDrainStopper, [0; 90; 0]*deg, ND_EtDrain, PS_Default))
FreezeStopper := FreezeLayer("EtDrainStoppersPlu")
EtDrainsRight2Inlets := stack(DrainCouplings, DrainPipes, StopperPipes, FreezeStopper)
ThawDrains := ThawMultiple(["EtCon"; "EtDrainCouplingsPlu"; "EtDrainPipesPlu"; "EtWeir"; "EtTrashrack"; "Cdc"; "CdcFittings"; "EtDrainStoppersPlu"])
MirrorDrains := Mirror3dAll("YZ", [Plant_Origin[0] - 1/2*L_Sed; 0 m; 0 m], "Y")
FreezeDrains := FreezeMultiple(["EtCon"; "EtDrainCouplingsPlu"; "EtDrainPipesPlu"; "EtWeir"; "EtTrashrack"; "Cdc"; "CdcFittings"; "EtDrainStoppersPlu"])
EtDrainsLeft2Inlets := stack(ThawDrains, MirrorDrains, FreezeDrains)
# Overflow Drain Grit
# The half of the PVC overflow channel closer to the right-hand end of the tank (from top view):
L_EtFrontToOverflowWeir :=
    (L_EtHopperFront + 2*ConRadius(ND_EtDrain) + 2*S_Fitting + ConRadius(ND_EtOverflowDrain)) if EN_DoubleTrain == 0
    (.5*L_EtHopperFront + 2*ConRadius(ND_EtDrain) + 2*S_Fitting + ConRadius(ND_EtOverflowDrain)) otherwise
L_EtFrontToOverflowWeir = 0.693675 m
EtOverflow_Origin == Et_Origin + [
    -CapThickness(ND_EtOverflowDrain);
    L_EtFrontToOverflowWeir/2;
    H_EtHopper + HL_Flowmeasure - innerdiameter(ND_EtOverflowDrain, PS_Default)/2 + H_EtOverflowCutaway + H_EtLFOMtoOverflow
]
EtOverflow_Origin := Et_Origin + [
    -CapThickness(ND_EtOverflowDrain);
    L_EtSupport + W_EtDC - S_Fitting - ConRadius(ND_EtOverflowDrain);
    H_EtHopper + HL_Flowmeasure - innerdiameter(ND_EtOverflowDrain, PS_Default)/2 + H_EtOverflowCutaway + H_EtLFOMtoOverflow
]
# Redone to be on the back side of the drain channel mrf222 7/4/2014
EtChannelPipe1 := PipeF(EtOverflow_Origin, L_EtChannelPipes, [0; 0; 0]*deg, ND_EtOverflowDrain, PS_Default)
# The half of the PVC overflow channel closer to the trash rack:
EtChannelPipe2 := PipeF(EtOverflow_Origin + [-L_EtChannelPipes - TeeLength(ND_EtOverflowDrain); 0 m; 0 m], L_EtChannelPipes, [0; 0; 0]*deg, ND_EtOverflowDrain, PS_Default)
EtOverflowTee := TeeF(EtOverflow_Origin + [-L_EtChannelPipes - TeeLength(ND_EtOverflowDrain)/2; 0 m; -ShortTeeLength(ND_EtOverflowDrain)], [0; 0; -90]*deg, ND_EtOverflowDrain, PS_Default)
EtOverflowCap1 := CapF(EtOverflow_Origin, [0; 0; 0]*deg, ND_EtOverflowDrain)
EtOverflowCap2 := CapF(EtOverflow_Origin + [-2*L_EtChannelPipes - TeeLength(ND_EtOverflowDrain); 0 m; 0 m], [0; 180; 0]*deg, ND_EtOverflowDrain)
L_EtOverflowPipeVert0 := H_EtHopper + HL_Flowmeasure - innerdiameter(ND_EtOverflowDrain, PS_Default)/2 + H_EtOverflowCutaway + H_EtLFOMtoOverflow - ShortTeeLength(ND_EtOverflowDrain) + T_PlantWall + zc
EtOverflowPipeVert := PipeSUBF(EtOverflow_Origin + [-L_EtChannelPipes - TeeLength(ND_EtOverflowDrain)/2; 0 m; -ShortTeeLength(ND_EtOverflowDrain)], L_EtOverflowPipeVert0, [0; -90; 0]*deg, ND_EtOverflowDrain, PS_Default, ["EtCon"])
EtOverflowElbow := ElbowSUBF(Et_Origin + [
    -CapThickness(ND_EtOverflowDrain) - L_EtChannelPipes - TeeLength(ND_EtOverflowDrain)/2;
    L_EtFrontToOverflowWeir;
    -T_PlantWall - ConRadius(ND_EtOverflowDrain) + ElbowRadius(ND_EtOverflowDrain)
], [90; 270; 0]*deg, ND_EtOverflowDrain, PS_Default, ["EtCon"])
EtOverflowWeirSlot := BoxF(Et_Origin + [
    0;
    L_EtFrontToOverflowWeir - W_EtOverflowSlot/2;
    H_EtHopper + HL_Flowmeasure + H_EtLFOMtoOverflow - zc
], Et_Origin + [
    -CapThickness(ND_EtOverflowDrain) - L_EtOverflowWeir/2;
    L_EtFrontToOverflowWeir + W_EtOverflowSlot/2;
    H_EtHopper + HL_Flowmeasure + H_EtOverflowCutaway + H_EtLFOMtoOverflow + CapThickness(ND_EtOverflowDrain) + 2*zc
], [0; 0; 0]*deg)
EtOverflowFittingLayer := layer_new("EtOverflowFittingPlu", green)
FreezeEtOverflowFittings := FreezeLayer("EtOverflowFittingPlu")
EtOverflowPipeLayer := layer_new("EtOverflowPipePlu", blue)
FreezeEtOverflowPipe := FreezeLayer("EtOverflowPipePlu")
SubtractSlotFromFittings := SubtractF(["EtOverflowFittingPlu"], "DeleteMe")
SubtractSlotFromPipes := SubtractF(["EtOverflowPipePlu"], "DeleteMe")
EtOverflowPluScript0 := stack(EtOverflowFittingLayer, EtOverflowTee, EtOverflowCap1, EtOverflowCap2, FreezeEtOverflowFittings, EtOverflowPipeLayer, EtOverflowPipeVert, EtChannelPipe1, EtChannelPipe2, FreezeEtOverflowPipe, EtOverflowWeirSlot, GroupDelete, SubtractSlotFromFittings, EtOverflowWeirSlot, GroupAll("DeleteMe"), SubtractSlotFromPipes)
# Overflow Drain Grit Two Inlets
# The half of the PVC overflow channel closer to the right-hand end of the tank (from top view):
L_EtFrontToOverflowWeir := L_EtHopperFront + 2*ConRadius(ND_EtDrain) + 2*S_Fitting + ConRadius(ND_EtOverflowDrain)
Et_OverflowWeirOrigin := Et_Origin + [-L_EtHopper; 0 m; 0 m]
EtChannelPipe1 := PipeF(Et_OverflowWeirOrigin + [
    -CapThickness(ND_EtOverflowDrain);
    L_EtFrontToOverflowWeir;
    H_EtHopper + HL_Flowmeasure - innerdiameter(ND_EtOverflowDrain, PS_Default)/2 + H_EtOverflowCutaway + H_EtLFOMtoOverflow
], L_EtChannelPipes, [0; 0; 0]*deg, ND_EtOverflowDrain, PS_Default)
# The half of the PVC overflow channel closer to the trash rack:
EtChannelPipe2 := PipeF(Et_OverflowWeirOrigin + [
    -CapThickness(ND_EtOverflowDrain) - L_EtChannelPipes - TeeLength(ND_EtOverflowDrain);
    L_EtFrontToOverflowWeir;
    H_EtHopper + HL_Flowmeasure - innerdiameter(ND_EtOverflowDrain, PS_Default)/2 + H_EtOverflowCutaway + H_EtLFOMtoOverflow
], L_EtChannelPipes, [0; 0; 0]*deg, ND_EtOverflowDrain, PS_Default)
EtOverflowTee := TeeF(Et_OverflowWeirOrigin + [
    -CapThickness(ND_EtOverflowDrain) - L_EtChannelPipes - TeeLength(ND_EtOverflowDrain)/2;
    L_EtFrontToOverflowWeir;
    H_EtHopper + HL_Flowmeasure - innerdiameter(ND_EtOverflowDrain, PS_Default)/2 + H_EtOverflowCutaway + H_EtLFOMtoOverflow - ShortTeeLength(ND_EtOverflowDrain)
], [0; 0; -90]*deg, ND_EtOverflowDrain, PS_Default)
EtOverflowCap1 := CapF(Et_OverflowWeirOrigin + [
    -CapThickness(ND_EtOverflowDrain);
    L_EtFrontToOverflowWeir;
    H_EtHopper + HL_Flowmeasure - innerdiameter(ND_EtOverflowDrain, PS_Default)/2 + H_EtOverflowCutaway + H_EtLFOMtoOverflow
], [0; 0; 0]*deg, ND_EtOverflowDrain)
EtOverflowCap2 := CapF(Et_OverflowWeirOrigin + [
    -CapThickness(ND_EtOverflowDrain) - 2*L_EtChannelPipes - TeeLength(ND_EtOverflowDrain);
    L_EtFrontToOverflowWeir;
    H_EtHopper + HL_Flowmeasure - innerdiameter(ND_EtOverflowDrain, PS_Default)/2 + H_EtOverflowCutaway + H_EtLFOMtoOverflow
], [0; 180; 0]*deg, ND_EtOverflowDrain)
L_EtOverflowPipeVert0 := H_EtHopper + HL_Flowmeasure - innerdiameter(ND_EtOverflowDrain, PS_Default)/2 + H_EtOverflowCutaway + H_EtLFOMtoOverflow - ShortTeeLength(ND_EtOverflowDrain) + T_PlantWall + zc
EtOverflowPipeVert := PipeSUBF(Et_OverflowWeirOrigin + [
    -CapThickness(ND_EtOverflowDrain) - L_EtChannelPipes - TeeLength(ND_EtOverflowDrain)/2;
    L_EtFrontToOverflowWeir;
    H_EtHopper + HL_Flowmeasure - innerdiameter(ND_EtOverflowDrain, PS_Default)/2 + H_EtOverflowCutaway + H_EtLFOMtoOverflow - ShortTeeLength(ND_EtOverflowDrain)
], L_EtOverflowPipeVert0, [0; -90; 0]*deg, ND_EtOverflowDrain, PS_Default, ["EtCon"])
EtOverflowWeirSlot := BoxF(Et_OverflowWeirOrigin + [
    0;
    L_EtFrontToOverflowWeir - W_EtOverflowSlot/2;
    H_EtHopper + HL_Flowmeasure + H_EtLFOMtoOverflow - zc
], Et_OverflowWeirOrigin + [
    -CapThickness(ND_EtOverflowDrain) - L_EtOverflowWeir/2;
    L_EtFrontToOverflowWeir + W_EtOverflowSlot/2;
    H_EtHopper + HL_Flowmeasure + H_EtOverflowCutaway + H_EtLFOMtoOverflow + CapThickness(ND_EtOverflowDrain) + 2*zc
], [0; 0; 0]*deg)
EtOverflowFittingLayer := layer_new("EtOverflowFittingPlu", green)
FreezeEtOverflowFittings := FreezeLayer("EtOverflowFittingPlu")
EtOverflowPipeLayer := layer_new("EtOverflowPipePlu", blue)
FreezeEtOverflowPipe := FreezeLayer("EtOverflowPipePlu")
Et_OverflowWeirPipe
SubtractSlotFromFittings := SubtractF(["EtOverflowFittingPlu"], "DeleteMe")
SubtractSlotFromPipes := SubtractF(["EtOverflowPipePlu"], "DeleteMe")
EtOverflowPluScript2 := stack(EtOverflowFittingLayer, EtOverflowTee, EtOverflowCap1, EtOverflowCap2, FreezeEtOverflowFittings, EtOverflowPipeLayer, EtOverflowPipeVert, EtChannelPipe1, EtChannelPipe2, FreezeEtOverflowPipe, EtOverflowWeirSlot, GroupDelete, SubtractSlotFromFittings, EtOverflowWeirSlot, GroupAll("DeleteMe"), SubtractSlotFromPipes)
EtOverflowElbow_Origin := [
    -L_Et + 2*(S_Fitting + ConRadius(ND_RMPipe)) + SocketDepth(ND_EtOverflowDrain) + ElbowRadius(ND_EtOverflowDrain);
    W_Et/2;
    -max(T_PlantWall, CouplingLength(ND_EtOverflowDrain)) - SocketDepth(ND_EtOverflowDrain)
] + Et_Origin
EtOverflowCoupling_Origin := [
    -L_Et + 2*(S_Fitting + ConRadius(ND_RMPipe)) + SocketDepth(ND_EtOverflowDrain) + ElbowRadius(ND_EtOverflowDrain);
    W_Et/2;
    -SocketDepth(ND_EtOverflowDrain)
] + Et_Origin
EtOverflowTee_Origin := [
    EtOverflowCoupling_Origin[0];
    EtOverflowCoupling_Origin[1];
    Et_Origin[2] + H_Et - H_PlantFreeboard + H_EtLFOMtoOverflow + H_EtOverflowCutaway - innerdiameter(ND_EtOverflowDrain, PS_Default)/2 - ShortTeeLength(ND_EtOverflowDrain)
]
EtOverflowCap1_Origin := [
    EtOverflowTee_Origin[0];
    Et_Origin[1] + W_Et - CapThickness(ND_EtOverflowDrain);
    EtOverflowTee_Origin[2] + ShortTeeLength(ND_EtOverflowDrain)
]
EtOverflowCap2_Origin := [
    EtOverflowTee_Origin[0];
    Et_Origin[1] + CapThickness(ND_EtOverflowDrain);
    EtOverflowTee_Origin[2] + ShortTeeLength(ND_EtOverflowDrain)
]
EtOverflowFittingsLayer := layer_new("EtOverflowDrainFittingsPlu", green)
EtOverflowElbow := ElbowF(EtOverflowElbow_Origin, [0; 0; 270]*deg, ND_EtOverflowDrain, PS_Default)  # must subtract out of drain channel later
.
EtOverflowCoupling := CouplingSUBF(EtOverflowCoupling_Origin, [0; 270]*deg, ND_EtOverflowDrain, PS_Default, ["EtCon"])
EtOverflowTee := TeeF(EtOverflowTee_Origin, [90; 270; 0]*deg, ND_EtOverflowDrain, PS_Default)
EtOverflowCap1 := CapF(EtOverflowCap1_Origin, [90; 0]*deg, ND_EtOverflowDrain)
EtOverflowCap2 := CapF(EtOverflowCap2_Origin, [270; 0]*deg, ND_EtOverflowDrain)
EtOverflowFittingsFrz := FreezeLayer("EtOverflowDrainFittingsPlu")
EtOverflowCutaway := BoxF([W_EtOverflowSlot/1.5; CapThickness(ND_EtOverflowDrain); ConRadius(ND_EtOverflowDrain) + zc] + EtOverflowCap1_Origin, [
    -W_EtOverflowSlot/1.5;
    -CapThickness(ND_EtOverflowDrain);
    innerdiameter(ND_EtOverflowDrain, PS_Default)/2 - H_EtOverflowCutaway
] + EtOverflowCap2_Origin, [0; 0; 0]*deg)
EtOverflowFittingsSub := SubtractF(["EtOverflowDrainFittingsPlu"], "DeleteMe")
EtOverflowFittingsPlu := stack(EtOverflowFittingsLayer, EtOverflowElbow, EtOverflowCoupling, EtOverflowTee, EtOverflowCap1, EtOverflowCap2, EtOverflowFittingsFrz, EtOverflowCutaway, GroupDelete, EtOverflowFittingsSub)
EtOverflowPipesLayer := layer_new("EtOverflowDrainPlu", blue)
L_EtOverflowNipple := EtOverflowCoupling_Origin[2] - CouplingLength(ND_EtOverflowDrain) + 2*SocketDepth(ND_EtOverflowDrain) - EtOverflowElbow_Origin[2]
EtOverflowNipple := PipeSUBF(EtOverflowElbow_Origin, L_EtOverflowNipple, [0; 90]*deg, ND_EtOverflowDrain, PS_Default, ["EtCon"])
L_EtOverflowPipeVert1 := EtOverflowTee_Origin[2] - EtOverflowCoupling_Origin[2]
EtOverflowVertPipe := PipeF(EtOverflowCoupling_Origin, L_EtOverflowPipeVert1, [0; 90]*deg, ND_EtOverflowDrain, PS_Default)
L_EtOverflowHorizPipes := 0.5*(W_Et - 2*CapThickness(ND_EtOverflowDrain) - TeeLength(ND_EtOverflowDrain))
EtOverflowHorizPipe1 := PipeF(EtOverflowCap1_Origin, L_EtOverflowHorizPipes, [90; 0]*deg, ND_EtOverflowDrain, PS_Default)
EtOverflowHorizPipe2 := PipeF(EtOverflowCap2_Origin, L_EtOverflowHorizPipes, [270; 0]*deg, ND_EtOverflowDrain, PS_Default)
EtOverflowPipesFrz := FreezeLayer("EtOverflowDrainPlu")
EtOverflowPipesSub := SubtractF(["EtOverflowDrainPlu"], "DeleteMe")
EtOverflowPipesPlu := stack(EtOverflowPipesLayer, EtOverflowNipple, EtOverflowVertPipe, EtOverflowHorizPipe1, EtOverflowHorizPipe2, EtOverflowPipesFrz, EtOverflowCutaway, GroupDelete, EtOverflowPipesSub)
EtOverflowPluScript1 := stack(EtOverflowFittingsPlu, EtOverflowPipesPlu)
# Overflow Drain No Grit
# Flow Control Drain Grit
L_EtFlowControlComponents := 2*MaleAdapterLength(ND_EtFlowControl) + ValveLength(ND_EtFlowControl) - 2*ValveSocket(ND_EtFlowControl) + SocketDepth(ND_EtFlowControl) + ElbowRadius(ND_EtFlowControl)
Z_EtFlowControl := max(Z_Walkway + ConRadius(ND_EtFlowControl), Et_Origin[2] - H_EtDC - T_PlantWall + ConRadius(ND_EtFlowControl) + 2*ElbowRadius(ND_EtFlowControl) + 2*SocketDepth(ND_EtFlowControl)) = 1.64978 m
EtFlowControlPipeLayer := layer_new("EtFlowControlPipePlu", blue)
L_EtFlowControlHorizPipe1 := SocketDepth(ND_EtFlowControl) + T_PlantWall
L_EtFlowControlHorizPipe2 := SocketDepth(ND_EtFlowControl) + T_PlantWall + 2*MaleAdapterLength(ND_EtFlowControl) + ValveLength(ND_EtFlowControl) - 2*ValveSocket(ND_EtFlowControl)
EtFlowControlHorizPipe1_Origin == [
    Et_Origin[0] + T_PlantWall + SocketDepth(ND_EtFlowControl);
    {
        (Et_Origin[1] + L_EtHopperFront + ConRadius(ND_EtDrain) + S_Fitting) if EN_DoubleTrain == 0
        (Et_Origin[1] + .5*L_EtHopperFront + 3*ConRadius(ND_EtDrain) + S_Fitting) otherwise
    };
    Z_EtFlowControl
]
EtFlowControlHorizPipe1_Origin := [
    Et_Origin[0] + T_PlantWall + SocketDepth(ND_EtFlowControl);
    EtDC_Origin[1] + S_Fitting + ConRadius(ND_EtFlowControl);
    Z_EtFlowControl
]  # y-coordinate changed, trying to make it at the fromt acceptable edge of the drain channel.
EtFlowControlHorizPipe1 := PipeSUBF(EtFlowControlHorizPipe1_Origin, L_EtFlowControlHorizPipe1, [0; 0; 0]*deg, ND_EtFlowControl, PS_Default, ["EtCon"])
EtFlowControlHorizPipe2 := PipeSUBF([
    Et_Origin[0] + L_EtFlowControlHorizPipe2;
    EtFlowControlHorizPipe1_Origin[1];
    min(Et_Origin[2] - T_PlantWall - ConRadius(ND_EtFlowControl), Z_EtFlowControl - 2*ElbowRadius(ND_EtFlowControl) - 2*SocketDepth(ND_EtFlowControl))
], L_EtFlowControlHorizPipe2, [0; 0; 0]*deg, ND_EtFlowControl, PS_Default, ["EtCon"])
EtFlowControlNipple1 := PipeF([
    Et_Origin[0] + T_PlantWall + SocketDepth(ND_EtFlowControl) + 2*MaleAdapterLength(ND_EtFlowControl) + ValveLength(ND_EtFlowControl) - 2*ValveSocket(ND_EtFlowControl);
    EtFlowControlHorizPipe1_Origin[1];
    Z_EtFlowControl
], 2*SocketDepth(ND_EtFlowControl), [0; 0; 0]*deg, ND_EtFlowControl, PS_Default)
L_EtFlowControlVert := Z_EtFlowControl - min(Et_Origin[2] - T_PlantWall - ConRadius(ND_EtFlowControl), Z_EtFlowControl - 2*ElbowRadius(ND_EtFlowControl) - 2*SocketDepth(ND_EtFlowControl)) - 2*ElbowRadius(ND_EtFlowControl) = 0.294061 m
EtFlowControlVertPipe_Origin := [
    Et_Origin[0] + T_PlantWall + SocketDepth(ND_EtFlowControl) + 2*MaleAdapterLength(ND_EtFlowControl) + ValveLength(ND_EtFlowControl) - 2*ValveSocket(ND_EtFlowControl) + ElbowRadius(ND_EtFlowControl);
    EtFlowControlHorizPipe1_Origin[1];
    Z_EtFlowControl - ElbowRadius(ND_EtFlowControl)
]
EtFlowControlVertPipe := PipeF(EtFlowControlVertPipe_Origin, L_EtFlowControlVert, [0; 270]*deg, ND_EtFlowControl, PS_Default)
EtFlowControlFittingLayer := layer_new("EtFlowControlFittingPlu", green)
EtFlowControlElbow1 := ElbowF([
    EtFlowControlVertPipe_Origin[0] - ElbowRadius(ND_EtFlowControl);
    EtFlowControlHorizPipe1_Origin[1];
    min(Et_Origin[2] - T_PlantWall - ConRadius(ND_EtFlowControl), Z_EtFlowControl - 2*ElbowRadius(ND_EtFlowControl) - 2*SocketDepth(ND_EtFlowControl))
], [-90; 0; 90]*deg, ND_EtFlowControl, PS_Default)
EtFlowControlElbow2 := ElbowF([
    EtFlowControlVertPipe_Origin[0] - ElbowRadius(ND_EtFlowControl);
    EtFlowControlHorizPipe1_Origin[1];
    Z_EtFlowControl
], [-90; 0; -90]*deg, ND_EtFlowControl, PS_Default)
EtFlowControlAdapterLayer := layer_new("EtFlowControlAdapterPlu", blue3)
EtFlowControlAdapter1 := MaleAdapterF([EtFlowControlHorizPipe1_Origin[0]; EtFlowControlHorizPipe1_Origin[1]; Z_EtFlowControl], [180; 0]*deg, ND_EtFlowControl, PS_Default)
EtFlowControlAdapter2 := MaleAdapterF([
    Et_Origin[0] + T_PlantWall + 2*MaleAdapterLength(ND_EtFlowControl) + ValveLength(ND_EtFlowControl) - 2*ValveSocket(ND_EtFlowControl) - SocketDepth(ND_EtFlowControl);
    EtFlowControlHorizPipe1_Origin[1];
    Z_EtFlowControl
], [0; 0]*deg, ND_EtFlowControl, PS_Default)
EtFlowControlValveLayer := layer_new("EtFlowControlValvePlu", blue2)
EtFlowControlValve == insertdwg("https://confluence.cornell.edu/download/attachments/173604905/Et-Scaled-Gate-Valve-Threaded.dwg", [
    EtFlowControlHorizPipe1_Origin[0] - SocketDepth(ND_EtFlowControl) + MaleAdapterLength(ND_EtFlowControl) - ValveSocket(ND_EtFlowControl) + ValveLength(ND_EtFlowControl);
    EtFlowControlHorizPipe1_Origin[1];
    Z_EtFlowControl
], 2*outerradius(ND_EtFlowControl)/(1.16 m), 2*outerradius(ND_EtFlowControl)/(1.16 m), 0 deg)
EtFlowControlValve := InsertThreadedValve("Et", ND_EtFlowControl, [
    EtFlowControlHorizPipe1_Origin[0] - SocketDepth(ND_EtFlowControl) + MaleAdapterLength(ND_EtFlowControl) - ValveSocket(ND_EtFlowControl) + ValveLength(ND_EtFlowControl);
    EtFlowControlHorizPipe1_Origin[1];
    Z_EtFlowControl
], 0 deg)
FlowControlScript0 := stack(EtFlowControlPipeLayer, EtFlowControlHorizPipe1, EtFlowControlHorizPipe2, EtFlowControlNipple1, EtFlowControlVertPipe, FreezeLayer("EtFlowControlPipePlu"), EtFlowControlFittingLayer, EtFlowControlElbow1, EtFlowControlElbow2, FreezeLayer("EtFlowControlFittingPlu"), EtFlowControlAdapterLayer, EtFlowControlAdapter1, EtFlowControlAdapter2, FreezeLayer("EtFlowControlAdapterPlu"), EtFlowControlValveLayer, EtFlowControlValve, FreezeLayer("EtFlowControlValvePlu"))
S_Fitting = 0.05 m
# Flow Control Drain Grit Two Inlets
L_EtFlowControlComponents := 2*MaleAdapterLength(ND_EtFlowControl) + ValveLength(ND_EtFlowControl) - 2*ValveSocket(ND_EtFlowControl) + SocketDepth(ND_EtFlowControl) + ElbowRadius(ND_EtFlowControl)
Z_EtFlowControl := max(Z_Walkway + ConRadius(ND_EtFlowControl), Et_Origin[2] - H_EtDC - T_PlantWall + ConRadius(ND_EtFlowControl) + 2*ElbowRadius(ND_EtFlowControl) + 2*SocketDepth(ND_EtFlowControl)) = 1.64978 m
EtFlowControlPipeLayer := layer_new("EtFlowControlPipePlu", blue)
L_EtFlowControlHorizPipe1 := SocketDepth(ND_EtFlowControl) + T_PlantWall
L_EtFlowControlHorizPipe2 := SocketDepth(ND_EtFlowControl) + T_PlantWall + 2*MaleAdapterLength(ND_EtFlowControl) + ValveLength(ND_EtFlowControl) - 2*ValveSocket(ND_EtFlowControl)
EtFlowControlHorizPipe1_Origin :=
    if EN_TwoInlets == 1
        [
            Et_Origin[0] + T_PlantWall + SocketDepth(ND_EtFlowControl);
            Et_Origin[1] + L_EtHopperFront + ConRadius(ND_EtDrain) + S_Fitting;
            Z_EtFlowControl
        ]
    otherwise
        [
            Et_Origin[0] + T_PlantWall + SocketDepth(ND_EtFlowControl);
            Et_Origin[1] + L_EtHopperFront*5/4 + ConRadius(ND_EtDrain) + S_Fitting;
            Z_EtFlowControl
        ]
EtFlowControlHorizPipe1L_Origin := EtFlowControlHorizPipe1_Origin + [0 m; (2*S_Fitting + 2*T_EtRemovableWallSupport) + T_EtRemovableWall + 2*ConRadius(ND_EtDrain); 0 m]
EtFlowControlHorizPipe1 := PipeSUBF(EtFlowControlHorizPipe1_Origin, L_EtFlowControlHorizPipe1, [0; 0; 0]*deg, ND_EtFlowControl, PS_Default, ["EtCon"])
EtFlowControlHorizPipe1L := PipeSUBF(EtFlowControlHorizPipe1L_Origin, L_EtFlowControlHorizPipe1, [0; 0; 0]*deg, ND_EtFlowControl, PS_Default, ["EtCon"])
EtFlowControlHorizPipe2 := PipeSUBF([
    Et_Origin[0] + L_EtFlowControlHorizPipe2;
    EtFlowControlHorizPipe1_Origin[1];
    min(Et_Origin[2] - T_PlantWall - ConRadius(ND_EtFlowControl), Z_EtFlowControl - 2*ElbowRadius(ND_EtFlowControl) - 2*SocketDepth(ND_EtFlowControl))
], L_EtFlowControlHorizPipe2, [0; 0; 0]*deg, ND_EtFlowControl, PS_Default, ["EtCon"])
EtFlowControlHorizPipe2L := PipeSUBF([
    Et_Origin[0] + L_EtFlowControlHorizPipe2;
    EtFlowControlHorizPipe1L_Origin[1];
    min(Et_Origin[2] - T_PlantWall - ConRadius(ND_EtFlowControl), Z_EtFlowControl - 2*ElbowRadius(ND_EtFlowControl) - 2*SocketDepth(ND_EtFlowControl))
], L_EtFlowControlHorizPipe2, [0; 0; 0]*deg, ND_EtFlowControl, PS_Default, ["EtCon"])
EtFlowControlNipple1 := PipeF([
    Et_Origin[0] + T_PlantWall + SocketDepth(ND_EtFlowControl) + 2*MaleAdapterLength(ND_EtFlowControl) + ValveLength(ND_EtFlowControl) - 2*ValveSocket(ND_EtFlowControl);
    EtFlowControlHorizPipe1_Origin[1];
    Z_EtFlowControl
], 2*SocketDepth(ND_EtFlowControl), [0; 0; 0]*deg, ND_EtFlowControl, PS_Default)
EtFlowControlNipple1L := PipeF([
    Et_Origin[0] + T_PlantWall + SocketDepth(ND_EtFlowControl) + 2*MaleAdapterLength(ND_EtFlowControl) + ValveLength(ND_EtFlowControl) - 2*ValveSocket(ND_EtFlowControl);
    EtFlowControlHorizPipe1L_Origin[1];
    Z_EtFlowControl
], 2*SocketDepth(ND_EtFlowControl), [0; 0; 0]*deg, ND_EtFlowControl, PS_Default)
L_EtFlowControlVert := Z_EtFlowControl - min(Et_Origin[2] - T_PlantWall - ConRadius(ND_EtFlowControl), Z_EtFlowControl - 2*ElbowRadius(ND_EtFlowControl) - 2*SocketDepth(ND_EtFlowControl)) - 2*ElbowRadius(ND_EtFlowControl) = 0.294061 m
EtFlowControlVertPipe_Origin := [
    Et_Origin[0] + T_PlantWall + SocketDepth(ND_EtFlowControl) + 2*MaleAdapterLength(ND_EtFlowControl) + ValveLength(ND_EtFlowControl) - 2*ValveSocket(ND_EtFlowControl) + ElbowRadius(ND_EtFlowControl);
    EtFlowControlHorizPipe1_Origin[1];
    Z_EtFlowControl - ElbowRadius(ND_EtFlowControl)
]
EtFlowControlVertPipe := PipeF(EtFlowControlVertPipe_Origin, L_EtFlowControlVert, [0; 270]*deg, ND_EtFlowControl, PS_Default)
EtFlowControlVertPipeL_Origin := [
    Et_Origin[0] + T_PlantWall + SocketDepth(ND_EtFlowControl) + 2*MaleAdapterLength(ND_EtFlowControl) + ValveLength(ND_EtFlowControl) - 2*ValveSocket(ND_EtFlowControl) + ElbowRadius(ND_EtFlowControl);
    EtFlowControlHorizPipe1L_Origin[1];
    Z_EtFlowControl - ElbowRadius(ND_EtFlowControl)
]
EtFlowControlVertPipeL := PipeF(EtFlowControlVertPipeL_Origin, L_EtFlowControlVert, [0; 270]*deg, ND_EtFlowControl, PS_Default)
EtFlowControlFittingLayer := layer_new("EtFlowControlFittingPlu", green)
EtFlowControlElbow1 := ElbowF([
    EtFlowControlVertPipe_Origin[0] - ElbowRadius(ND_EtFlowControl);
    EtFlowControlHorizPipe1_Origin[1];
    min(Et_Origin[2] - T_PlantWall - ConRadius(ND_EtFlowControl), Z_EtFlowControl - 2*ElbowRadius(ND_EtFlowControl) - 2*SocketDepth(ND_EtFlowControl))
], [-90; 0; 90]*deg, ND_EtFlowControl, PS_Default)
EtFlowControlElbow2 := ElbowF([
    EtFlowControlVertPipe_Origin[0] - ElbowRadius(ND_EtFlowControl);
    EtFlowControlHorizPipe1_Origin[1];
    Z_EtFlowControl
], [-90; 0; -90]*deg, ND_EtFlowControl, PS_Default)
EtFlowControlElbow1L := ElbowF([
    EtFlowControlVertPipe_Origin[0] - ElbowRadius(ND_EtFlowControl);
    EtFlowControlHorizPipe1L_Origin[1];
    min(Et_Origin[2] - T_PlantWall - ConRadius(ND_EtFlowControl), Z_EtFlowControl - 2*ElbowRadius(ND_EtFlowControl) - 2*SocketDepth(ND_EtFlowControl))
], [-90; 0; 90]*deg, ND_EtFlowControl, PS_Default)
EtFlowControlElbow2L := ElbowF([
    EtFlowControlVertPipe_Origin[0] - ElbowRadius(ND_EtFlowControl);
    EtFlowControlHorizPipe1L_Origin[1];
    Z_EtFlowControl
], [-90; 0; -90]*deg, ND_EtFlowControl, PS_Default)
EtFlowControlAdapterLayer := layer_new("EtFlowControlAdapterPlu", blue3)
EtFlowControlAdapter1 := MaleAdapterF([EtFlowControlHorizPipe1_Origin[0]; EtFlowControlHorizPipe1_Origin[1]; Z_EtFlowControl], [180; 0]*deg, ND_EtFlowControl, PS_Default)
EtFlowControlAdapter2 := MaleAdapterF([
    Et_Origin[0] + T_PlantWall + 2*MaleAdapterLength(ND_EtFlowControl) + ValveLength(ND_EtFlowControl) - 2*ValveSocket(ND_EtFlowControl) - SocketDepth(ND_EtFlowControl);
    EtFlowControlHorizPipe1_Origin[1];
    Z_EtFlowControl
], [0; 0]*deg, ND_EtFlowControl, PS_Default)
EtFlowControlAdapter1L := MaleAdapterF([EtFlowControlHorizPipe1_Origin[0]; EtFlowControlHorizPipe1L_Origin[1]; Z_EtFlowControl], [180; 0]*deg, ND_EtFlowControl, PS_Default)
EtFlowControlAdapter2L := MaleAdapterF([
    Et_Origin[0] + T_PlantWall + 2*MaleAdapterLength(ND_EtFlowControl) + ValveLength(ND_EtFlowControl) - 2*ValveSocket(ND_EtFlowControl) - SocketDepth(ND_EtFlowControl);
    EtFlowControlHorizPipe1L_Origin[1];
    Z_EtFlowControl
], [0; 0]*deg, ND_EtFlowControl, PS_Default)
EtFlowControlValveLayer := layer_new("EtFlowControlValvePlu", blue2)
EtFlowControlValve == insertdwg("https://confluence.cornell.edu/download/attachments/173604905/Et-Scaled-Gate-Valve-Threaded.dwg", [
    EtFlowControlHorizPipe1_Origin[0] - SocketDepth(ND_EtFlowControl) + MaleAdapterLength(ND_EtFlowControl) - ValveSocket(ND_EtFlowControl) + ValveLength(ND_EtFlowControl);
    EtFlowControlHorizPipe1_Origin[1];
    Z_EtFlowControl
], 2*outerradius(ND_EtFlowControl)/(1.16 m), 2*outerradius(ND_EtFlowControl)/(1.16 m), 0 deg)
EtFlowControlValve := InsertThreadedValve("Et", ND_EtFlowControl, [
    EtFlowControlHorizPipe1_Origin[0] - SocketDepth(ND_EtFlowControl) + MaleAdapterLength(ND_EtFlowControl) - ValveSocket(ND_EtFlowControl) + ValveLength(ND_EtFlowControl);
    EtFlowControlHorizPipe1_Origin[1];
    Z_EtFlowControl
], 0 deg)
EtFlowControlValveL == insertdwg("https://confluence.cornell.edu/download/attachments/173604905/Et-Scaled-Gate-Valve-Threaded.dwg", [
    EtFlowControlHorizPipe1_Origin[0] - SocketDepth(ND_EtFlowControl) + MaleAdapterLength(ND_EtFlowControl) - ValveSocket(ND_EtFlowControl) + ValveLength(ND_EtFlowControl);
    EtFlowControlHorizPipe1L_Origin[1];
    Z_EtFlowControl
], 2*outerradius(ND_EtFlowControl)/(1.16 m), 2*outerradius(ND_EtFlowControl)/(1.16 m), 0 deg)
EtFlowControlValveL := InsertThreadedValve("Et", ND_EtFlowControl, [
    EtFlowControlHorizPipe1_Origin[0] - SocketDepth(ND_EtFlowControl) + MaleAdapterLength(ND_EtFlowControl) - ValveSocket(ND_EtFlowControl) + ValveLength(ND_EtFlowControl);
    EtFlowControlHorizPipe1L_Origin[1];
    Z_EtFlowControl
], 0 deg)
FlowControlScript2 := stack(EtFlowControlPipeLayer, EtFlowControlHorizPipe1, EtFlowControlHorizPipe1L, EtFlowControlHorizPipe2, EtFlowControlHorizPipe2L, EtFlowControlNipple1, EtFlowControlNipple1L, EtFlowControlVertPipe, EtFlowControlVertPipeL, FreezeLayer("EtFlowControlPipePlu"), EtFlowControlFittingLayer, EtFlowControlElbow1, EtFlowControlElbow1L, EtFlowControlElbow2, EtFlowControlElbow2L, FreezeLayer("EtFlowControlFittingPlu"), EtFlowControlAdapterLayer, EtFlowControlAdapter1, EtFlowControlAdapter1L, EtFlowControlAdapter2, EtFlowControlAdapter2L, FreezeLayer("EtFlowControlAdapterPlu"), EtFlowControlValveLayer, EtFlowControlValve, EtFlowControlValveL, FreezeLayer("EtFlowControlValvePlu"))
EtFlowControlCoupling_Origin := [-L_Et - SocketDepth(ND_EtFlowControl); ConRadius(ND_EtFlowControl); 0] + Et_Origin
L_EtFlowControlPipe := max(T_PlantWall - CouplingLength(ND_EtFlowControl), 0) + 2*SocketDepth(ND_EtFlowControl) + S_Fitting
EtFlowControlAdapter1_Origin := [-L_EtFlowControlPipe + SocketDepth(ND_EtFlowControl); 0; 0] + EtFlowControlCoupling_Origin
EtFlowControlValve_Origin := [
    -MaleAdapterLength(ND_EtFlowControl) + SocketDepth(ND_EtFlowControl) + ValveSocket(ND_EtFlowControl);
    0;
    0
] + EtFlowControlAdapter1_Origin
EtFlowControlAdapter2_Origin := [
    -ValveLength(ND_EtFlowControl) + ValveSocket(ND_EtFlowControl) - MaleAdapterLength(ND_EtFlowControl) + SocketDepth(ND_EtFlowControl);
    0;
    0
] + EtFlowControlValve_Origin
EtFlowControlElbow_Origin := [-2*SocketDepth(ND_EtFlowControl); 0; 0] + EtFlowControlAdapter2_Origin
EtFlowControlFittingLayer := layer_new("EtFlowControlFittingPlu", green)
EtFlowControlCoupling := CouplingSUBF(EtFlowControlCoupling_Origin, [0; 0], ND_EtFlowControl, PS_Default, ["EtCon"])
EtFlowControlAdapter1 := MaleAdapterF(EtFlowControlAdapter1_Origin, [0; 0], ND_EtFlowControl, PS_Default)
EtFlowControlValve := insertdwg("https://confluence.cornell.edu/download/attachments/173604905/Et-Scaled-Gate-Valve-Threaded.dwg", EtFlowControlValve_Origin, 2*outerradius(ND_EtFlowControl)/(1.16 m), 2*outerradius(ND_EtFlowControl)/(1.16 m), 0 deg)
EtFlowControlAdapter2 := MaleAdapterF(EtFlowControlAdapter2_Origin, [180; 0]*deg, ND_EtFlowControl, PS_Default)
EtFlowControlElbow := ElbowF(EtFlowControlElbow_Origin, [90; 0; 90]*deg, ND_EtFlowControl, PS_Default)
EtFlowControlFittingsFrz := FreezeLayer("EtFlowControlFittingsPlu")
EtFlowControlFittings :=
    stack(EtFlowControlFittingLayer, EtFlowControlCoupling, EtFlowControlAdapter1, EtFlowControlValve, EtFlowControlFittingsFrz) if Z_Walkway ≤ Z_Et
    stack(EtFlowControlFittingLayer, EtFlowControlCoupling, EtFlowControlAdapter1, EtFlowControlValve, EtFlowControlAdapter2, EtFlowControlElbow, EtFlowControlFittingsFrz) otherwise
EtFlowControlPipeLayer := layer_new("EtFlowControlPipePlu", blue)
EtFlowControlPipe := PipeSUBF(EtFlowControlCoupling_Origin + [-CouplingLength(ND_EtFlowControl) + 2*SocketDepth(ND_EtFlowControl); 0; 0], L_EtFlowControlPipe, [0; 0], ND_EtFlowControl, PS_Default, ["EtCon"])
L_EtFlowControlNipple := 2*SocketDepth(ND_EtFlowControl)
EtFlowControlNipple := PipeF(EtFlowControlAdapter2_Origin, L_EtFlowControlNipple, [0; 0], ND_EtFlowControl, PS_Default)
L_EtFlowControlVertPipe := Z_Et - Z_Walkway + SocketDepth(ND_EtFlowControl)
EtFlowControlVertPipe := PipeF(EtFlowControlElbow_Origin + [-ElbowRadius(ND_EtFlowControl); 0; -ElbowRadius(ND_EtFlowControl)], L_EtFlowControlVertPipe, [0; 90]*deg, ND_EtFlowControl, PS_Default)
EtFlocControlPipeFrz := FreezeLayer("EtFlowControlPipePlu")
EtFlowControlPipes :=
    stack(EtFlowControlPipeLayer, EtFlowControlPipe, EtFlocControlPipeFrz) if Z_Walkway ≤ Z_Et
    stack(EtFlowControlPipeLayer, EtFlowControlPipe, EtFlowControlNipple, EtFlowControlVertPipe, EtFlocControlPipeFrz) otherwise
FlowControlScript1 := stack(EtFlowControlFittings, EtFlowControlPipes)
# Flow Control Drain No Grit
# Inlet Pipe
EtInletElbow_Origin0 == (Et_Origin + [; 0 m;; L_EtFrontToOverflowWeir/2 + ConRadius(ND_EtOverflowDrain) + S_Fitting + ConRadius(ND_EtInlet);; H_Et + DropEt + ConRadius(ND_EtInlet); ])
EtInletElbow_Origin0 := Et_Origin + [0 m; L_EtSupport + W_EtDC + ConRadius(ND_EtInlet); H_Et + DropEt + ConRadius(ND_EtInlet)] = [-3.27707; 7.05442; 2.67043] m
EtInletElbow_Origin1 := Et_Origin + [
    ElbowRadius(ND_EtInlet) - S_Fitting - ConRadius(ND_EtInlet);
    0.5*W_Et;
    H_Et + DropEt + ConRadius(ND_EtInlet) + ElbowRadius(ND_EtInlet) - SocketDepth(ND_EtInlet)
] = [-3.31675; 6.71949; 2.69742] m
EtInletElbow_Origin2 := Et_Origin + [ConRadius(ND_EtInlet); ConRadius(ND_EtInlet) + S_Fitting; H_Et + DropEt + ConRadius(ND_EtInlet)]
L_EtFrontToOverflowWeir = 0.693675 m
EtInletElbow_Origin :=
    EtInletElbow_Origin0 if EN_EtGrit == 0 and EN_DoubleTrain == 0
    EtInletElbow_Origin2 if EN_DoubleTrain == 1
    EtInletElbow_Origin1 otherwise
Et_Origin = [-3.27707; 6.1004; 1.41841] m
EtInletPipeLayer := layer_new("EtInletPipePlu", blue)
EtInletFittingLayer := layer_new("EtInletFittingPlu", green)
ND_EtInlet = 0.2032 m
EtInletElbow := ElbowF(EtInletElbow_Origin, [90; 0; 90]*deg, ND_EtInlet, PS_Default)
L_EtInletPipe := 1 m
EtInletPipe := PipeF(EtInletElbow_Origin + [L_EtInletPipe; 0; 0], L_EtInletPipe, [0; 0; 0]*deg, ND_EtInlet, PS_Default)
FreezeEtInletPipe := FreezeLayer("EtInletPipePlu")
FreezeEtInletFittings := FreezeLayer("EtInletFittingPlu")
EtInletScript := stack(EtInletFittingLayer, EtInletElbow, FreezeEtInletFittings, EtInletPipeLayer, EtInletPipe, FreezeEtInletPipe)
# Entrance Pipe Flow Control
NewLayerInletPlumbing := layer_new("InletPlumbing", green)
DCElbow1_Origin := [
    EtDC_Origin[0] + L_EtDC + T_ChannelWall + SocketDepth(ND_Pvc);
    EtDC_Origin[1] + 3/4*W_EtDC;
    EtDC_Origin[2] - ElbowRadius(ND_Pvc)
]  # The team set the y component of DCElbow1Origin to EtDC_Origin[1]+ 3/4W_EtDC to ensure the water drains into the entrance tank
DCElbow1 := ElbowF(DCElbow1_Origin, [-90; 0; 90]*deg, ND_Pvc, PS_Default)
DCPipe1_Origin := [
    DCElbow1_Origin[0] + ElbowRadius(ND_Pvc);
    DCElbow1_Origin[1];
    DCElbow1_Origin[2] + ElbowRadius(ND_Pvc)
]
LengthPipe1 := SocketDepth(ND_Et) + ElbowRadius(ND_Et) + ShortTeeLength(ND_Et) + ND_Et + 1/2*TeeLength(ND_Pvc) + H_Et - ElbowRadius(ND_Pvc) = 1.68064 m
DCPipe1 := PipeF(DCPipe1_Origin, LengthPipe1, [0; 90; 0]*deg, ND_Pvc, PS_Default)
DCElbow2_Origin := [DCPipe1_Origin[0]; DCPipe1_Origin[1]; DCPipe1_Origin[2] + LengthPipe1]
DCElbow2 := ElbowF(DCElbow2_Origin, [0; 0; 90]*deg, ND_Pvc, PS_Default)
DCPipe2_Origin := [
    DCElbow2_Origin[0] - ElbowRadius(ND_Pvc);
    DCElbow2_Origin[1];
    DCElbow2_Origin[2] + ElbowRadius(ND_Pvc)
]
LengthPipe2 := L_horizontalPipe4to5 - 2*ElbowRadius(ND_Pvc) - ShortTeeLength(ND_Pvc)
DCPipe2 := PipeF(DCPipe2_Origin, LengthPipe2, [0; 0; 0]*deg, ND_Pvc, PS_Default)
DCTee1_Origin := [DCPipe2_Origin[0] - LengthPipe2; DCPipe2_Origin[1]; DCPipe2_Origin[2]]
DCTee1_Origin = [-4.12041; 6.82721; 3.01017] m
DCTee1 := TeeF(DCTee1_Origin, [-90; 0; -90]*deg, ND_Pvc, PS_Default)
DCPipe3_Origin := [
    DCTee1_Origin[0] - ShortTeeLength(ND_Pvc);
    DCTee1_Origin[1];
    DCTee1_Origin[2] - 1/2*TeeLength(ND_Pvc)
]
LengthPipe3 := ND_Pvc
DCPipe3 := PipeF(DCPipe3_Origin, LengthPipe3, [0; -90; 0]*deg, ND_Pvc, PS_Default)
# DCTee2  Note: we are using ND of the entrance pipe, but this is actually going to be a reducer tee. It must update accordingly in the future
TeeFSerena(OriginPoint, AngleVector, ND, ND_Short, EN) :=
    ShortPipe ← cylinderD(OriginPoint, outerradius(ND_Short), OriginPoint - [0 m; ShortTeeLength(ND_Short); 0 m])
    LongPipe ← cylinderD([OriginPoint[0] + ShortTeeLength(ND); OriginPoint[1] - ShortTeeLength(ND_Short); OriginPoint[2]], outerradius(ND), [OriginPoint[0] - ShortTeeLength(ND); OriginPoint[1] - ShortTeeLength(ND_Short); OriginPoint[2]])
    Zoom ← ZoomWindow([
        OriginPoint[0] - ShortTeeLength(ND) - SocketDepth(ND) - zc;
        OriginPoint[1] - ShortTeeLength(ND_Short) - ConRadius(ND) - zc;
        OriginPoint[2] - ConRadius(ND) - zc
    ], [
        OriginPoint[0] + ShortTeeLength(ND) + SocketDepth(ND) + zc;
        OriginPoint[1] + SocketDepth(ND_Short) + zc;
        OriginPoint[2] + ConRadius(ND) + zc
    ])
    CylinderVert ← cylinderD([OriginPoint[0]; OriginPoint[1] + SocketDepth(ND_Short) + zc; OriginPoint[2]], innerdiameter(ND_Short, EN)/2, [OriginPoint[0]; OriginPoint[1] - ShortTeeLength(ND_Short); OriginPoint[2]])
    SubtractVertExcess ← SubtractGeneral([
        [OriginPoint[0] + outerradius(ND_Short); OriginPoint[1]; OriginPoint[2]];
        [
            OriginPoint[0] + ShortTeeLength(ND);
            OriginPoint[1] - ShortTeeLength(ND_Short) + outerradius(ND_Short);
            OriginPoint[2]
        ]
    ], [[
        OriginPoint[0] - innerdiameter(ND_Short, EN)/2;
        OriginPoint[1] + SocketDepth(ND_Short) + zc;
        OriginPoint[2]
    ]])
    CylinderHoriz ← cylinderD([
        OriginPoint[0] + ShortTeeLength(ND) + zc;
        OriginPoint[1] - ShortTeeLength(ND_Short);
        OriginPoint[2]
    ], innerdiameter(ND, EN)/2, [
        OriginPoint[0] - ShortTeeLength(ND) - zc;
        OriginPoint[1] - ShortTeeLength(ND_Short);
        OriginPoint[2]
    ])
    SubtractHorizExcess ← SubtractGeneral([
        [OriginPoint[0] + outerradius(ND_Short); OriginPoint[1]; OriginPoint[2]];
        [
            OriginPoint[0] + ShortTeeLength(ND);
            OriginPoint[1] - ShortTeeLength(ND_Short) + outerradius(ND_Short);
            OriginPoint[2]
        ]
    ], [[
        OriginPoint[0] + ShortTeeLength(ND) + zc;
        OriginPoint[1] - ShortTeeLength(ND_Short) - innerdiameter(ND_Short, EN)/2;
        OriginPoint[2]
    ]])
    RightSocketOuter ← cylinderD([OriginPoint[0] + ShortTeeLength(ND); OriginPoint[1] - ShortTeeLength(ND_Short); OriginPoint[2]], ConRadius(ND), [
        OriginPoint[0] + ShortTeeLength(ND) + SocketDepth(ND);
        OriginPoint[1] - ShortTeeLength(ND_Short);
        OriginPoint[2]
    ])
    RightSocketInner ← cylinderD([
        OriginPoint[0] + ShortTeeLength(ND) - zc;
        OriginPoint[1] - ShortTeeLength(ND_Short);
        OriginPoint[2]
    ], outerradius(ND), [
        OriginPoint[0] + ShortTeeLength(ND) + SocketDepth(ND) + zc;
        OriginPoint[1] - ShortTeeLength(ND_Short);
        OriginPoint[2]
    ])
    SubtractRightSocket ← SubtractGeneral([[
        OriginPoint[0] + ShortTeeLength(ND) + SocketDepth(ND);
        OriginPoint[1] - ShortTeeLength(ND_Short) - ConRadius(ND);
        OriginPoint[2]
    ]], [[
        OriginPoint[0] + ShortTeeLength(ND) + SocketDepth(ND) + zc;
        OriginPoint[1] - ShortTeeLength(ND_Short) - outerradius(ND) + SocketDepth(ND_Short);
        OriginPoint[2]
    ]])
    MirrorSocketAcross ← Mirror([
        OriginPoint[0] + ShortTeeLength(ND);
        OriginPoint[1] - ShortTeeLength(ND_Short) + SocketDepth(ND_Short) - ConRadius(ND)
    ], [OriginPoint[0]; OriginPoint[1]], [OriginPoint[0]; OriginPoint[1] + zc], "n")
    MirrorSocketUp ← Mirror([
        OriginPoint[0] + ShortTeeLength(ND);
        OriginPoint[1] - ShortTeeLength(ND_Short) + SocketDepth(ND_Short) - ConRadius(ND)
    ], [OriginPoint[0]; OriginPoint[1] - ShortTeeLength(ND_Short)], [OriginPoint[0] + zc; OriginPoint[1] - ShortTeeLength(ND_Short) + zc], "n")
    TopSocketOuter ← cylinderD(OriginPoint, ConRadius(ND_Short), OriginPoint + [0 m; SocketDepth(ND_Short); 0 m])
    TopSocketInner ← cylinderD(OriginPoint - [0 m; zc; 0 m], outerradius(ND_Short), OriginPoint + [0 m; SocketDepth(ND_Short) + zc; 0 m])
    SubtractTopSocket ← SubtractGeneral([OriginPoint + [ConRadius(ND_Short); SocketDepth(ND_Short); 0 m]], [OriginPoint + [outerradius(ND_Short); SocketDepth(ND_Short) + zc; 0 m]])
    UnionPieces ← UnionMultiple([
        [
            OriginPoint[0] + outerradius(ND_Short);
            OriginPoint[1] - 0.25*ShortTeeLength(ND_Short);
            OriginPoint[2]
        ];
        [OriginPoint[0] + ConRadius(ND_Short); OriginPoint[1] + SocketDepth(ND_Short); OriginPoint[2]];
        [
            OriginPoint[0] + 0.75*ShortTeeLength(ND);
            OriginPoint[1] - ShortTeeLength(ND_Short) + outerradius(ND);
            OriginPoint[2]
        ];
        [
            OriginPoint[0] - ShortTeeLength(ND) - SocketDepth(ND);
            OriginPoint[1] - ShortTeeLength(ND_Short) - ConRadius(ND);
            OriginPoint[2]
        ];
        [
            OriginPoint[0] + ShortTeeLength(ND) + SocketDepth(ND);
            OriginPoint[1] - ShortTeeLength(ND_Short) + ConRadius(ND);
            OriginPoint[2]
        ]
    ])
    Rotate ← [
        Rotate3DLast(OriginPoint, "z", AngleVector[0]);
        Rotate3DLast(OriginPoint, "y", AngleVector[1]);
        Rotate3DLast(OriginPoint, "x", AngleVector[2])
    ]
    Final ← stack(ShortPipe, LongPipe, Zoom, CylinderVert, SubtractVertExcess, CylinderHoriz, SubtractHorizExcess, RightSocketOuter, RightSocketInner, SubtractRightSocket, TopSocketOuter, TopSocketInner, SubtractTopSocket, MirrorSocketAcross, MirrorSocketUp, UnionPieces)
    for i ∈ 0 .. 2
        Final ← stack(Final, Rotate[i]) if AngleVector[i] ≠ 0
    return Final
OriginPoint, AngleVector, ND, ND_Short, EN
DCTee2_Origin := [DCPipe3_Origin[0]; DCPipe3_Origin[1]; DCPipe3_Origin[2] - LengthPipe3]
□ := TeeF(DCTee2_Origin, [90; -270; 0]*deg, ND_Pvc, PS_Default)  # error: This placeholder is empty.
TeeeFSerena := TeeFSerena(DCTee2_Origin, [0; -270; 90]*deg, ND_Et, ND_Pvc, PS_Default)
[DCTee2_Origin[0] + ConRadius(ND_Et); DCTee2_Origin[1] + SocketDepth(ND_Pvc); DCTee2_Origin[2]] = [-4.13311; 6.8788; 2.81639] m
# [component: inputs TeeeFSerena]
EtThreadedValve_Origin := [
    DCTee2_Origin[0];
    DCTee2_Origin[1] - 1/2*TeeLength(ND_Pvc) - SocketDepth(ND_Pvc);
    DCTee2_Origin[2] - ShortTeeLength(ND_Pvc)
]  # DCTee2
EtFlowValve := InsertThreadedValve("Et", ND_Et, EtThreadedValve_Origin, 90 deg)
DCElbow3_Origin := [
    EtThreadedValve_Origin[0];
    EtThreadedValve_Origin[1] - ValveLength(ND_Et) - SocketDepth(ND_Et);
    EtThreadedValve_Origin[2]
]
DCElbow3 := ElbowF(DCElbow3_Origin, [90; 90; 90]*deg, ND_Et, PS_Default)
DCPipe5_Origin := [
    DCTee2_Origin[0];
    DCTee2_Origin[1] + 1/2*TeeLength(ND_Pvc);
    DCTee2_Origin[2] - ShortTeeLength(ND_Pvc)
]
LengthPipe5 := 35 in  # LengthPipe5 is entrance pipe length set to arbitrary length
DCPipe5 := PipeF(DCPipe5_Origin, LengthPipe5, [-90; 0; -90]*deg, ND_Et, PS_Default)
DCPipe6_Origin := [
    DCTee1_Origin[0] - ShortTeeLength(ND_Pvc);
    DCTee1_Origin[1];
    DCTee1_Origin[2] + .5*TeeLength(ND_Pvc)
]
LengthPipe6 := h_4to6(Q_Plant, ND_Et, ND_Pvc)*SF_4to6
DCPipe6 := PipeF(DCPipe6_Origin, LengthPipe6, [0; -90; 0]*deg, ND_Pvc, PS_Default)
ND_TSpipe := round(DecPipe(ND_Pvc)/m*1000)*m/1000
TSElbow1_Origin := [DCPipe6_Origin[0]; DCPipe6_Origin[1]; DCPipe6_Origin[2] - LengthPipe6]
TSElbow1 := ElbowF(TSElbow1_Origin, [0; 0; 90]*deg, ND_TSpipe, PS_Default)
TSPipe2_Origin := [
    TSElbow1_Origin[0] - ElbowRadius(ND_TSpipe);
    TSElbow1_Origin[1];
    TSElbow1_Origin[2] + ElbowRadius(ND_TSpipe)
]
LengthTSPipe2 := 4*ND_Pvc  # We set LengthTSPipe2 arbitrarily 4*ND.Pvc
TSPipe2 := PipeF(TSPipe2_Origin, LengthTSPipe2, [0; 0; 0]*deg, ND_TSpipe, PS_Default)
TSElbow2_Origin := [TSPipe2_Origin[0] - LengthTSPipe2; TSPipe2_Origin[1]; TSPipe2_Origin[2]]
TSElbow2 := ElbowF(TSElbow2_Origin, [90; 0; 90]*deg, ND_TSpipe, PS_Default)
DCPipe7_Origin := [DCElbow1_Origin[0]; DCElbow1_Origin[1]; DCElbow1_Origin[2]]
LengthPipe7 := T_PlantWall + SocketDepth(ND_Pvc)
DCPipe7 := PipeF(DCPipe7_Origin, LengthPipe7, [0; 0; 0]*deg, ND_Pvc, PS_Default)
NewLayerInletPlumbingFrz := FreezeLayer("InletPlumbing")
TeeeFSerena
InletPlumbing := stack(NewLayerInletPlumbing, DCElbow1, DCPipe1, DCElbow2, DCPipe2, DCTee1, DCPipe3, TeeeFSerena, EtFlowValve, DCPipe5, DCElbow3, DCPipe6, TSElbow1, TSPipe2, TSElbow2, DCPipe7, NewLayerInletPlumbingFrz)
DCTee2
EntranceFlowControl :=
    stack(EtTankScript, EtTrashRackScript, RMScript, NewLayerInletPlumbing, DCElbow1, DCPipe1, DCElbow2, DCPipe2, DCTee1, DCPipe3, TeeeFSerena, EtFlowValve, DCPipe5, DCElbow3, DCPipe6, DCPipe7, TSElbow1, TSPipe2, TSElbow2, NewLayerInletPlumbingFrz) if EN_EtGrit == 0 and EN_TwoInlets == 0 and EN_LfomPipe == 1
    stack(EtTankScript2, EtTrashRackScript, RMScript, NewLayerInletPlumbing, DCElbow1, DCPipe1, DCElbow2, DCPipe2, DCTee1, DCPipe3, TeeeFSerena, EtFlowValve, DCPipe5, DCElbow3, DCPipe6, DCPipe7, TSElbow1, TSPipe2, TSElbow2, NewLayerInletPlumbingFrz) if EN_EtGrit == 0 and EN_TwoInlets == 1 and EN_LfomPipe == 1
    stack(EtTankScript, ModificationScript, EtTrashRackScript, LfomChannelScript, NewLayerInletPlumbing, DCElbow1, DCPipe1, DCElbow2, DCPipe2, DCTee1, DCPipe3, TeeeFSerena, EtFlowValve, DCPipe5, DCElbow3, DCPipe6, DCPipe7, TSElbow1, TSPipe2, TSElbow2, NewLayerInletPlumbingFrz) if EN_EtGrit == 0 and EN_LfomPipe == 0 and EN_TwoInlets == 0
    stack(EtTankScript2, ModificationScript, EtTrashRackScript, LfomChannelScript, NewLayerInletPlumbing, DCElbow1, DCPipe1, DCElbow2, DCPipe2, DCTee1, DCPipe3, TeeeFSerena, EtFlowValve, DCPipe5, DCElbow3, DCPipe6, DCPipe7, TSElbow1, TSPipe2, TSElbow2, NewLayerInletPlumbingFrz) if EN_EtGrit == 0 and EN_LfomPipe == 0 and EN_TwoInlets == 1
    stack(EtTankScript, RMScript, NewLayerInletPlumbing, DCElbow1, DCPipe1, DCElbow2, DCPipe2, DCTee1, DCPipe3, TeeeFSerena, EtFlowValve, DCPipe5, DCElbow3, DCPipe6, DCPipe7, TSElbow1, TSPipe2, TSElbow2, NewLayerInletPlumbingFrz) otherwise
# [component: inputs EntranceFlowControl]
# Inlet Pipe Two Inlets
EtInletElbow_Origin0 := Et_Origin + [
    0 m;
    L_EtFrontToOverflowWeir + ConRadius(ND_EtOverflowDrain) + S_Fitting + ConRadius(ND_EtInlet);
    H_Et + ConRadius(ND_EtInlet)
]
EtInletElbow_Origin0 := Et_Origin + [
    0 m;
    L_EtHopperFront + 4*ConRadius(ND_EtDrain) + 4*S_Fitting + ConRadius(ND_EtInlet) + T_EtRemovableWall + 2*T_EtRemovableWallSupport;
    H_Et + ConRadius(ND_EtInlet)
]
# Starts after flat on bottom of hopper on back side
# New Back Inlet Origin
# No longer involves OFW
EtInletElbow_Origin1 := Et_Origin + [
    ElbowRadius(ND_EtInlet) - S_Fitting - ConRadius(ND_EtInlet);
    0.5*W_Et;
    H_Et + ConRadius(ND_EtInlet) + ElbowRadius(ND_EtInlet) - SocketDepth(ND_EtInlet)
]
EtInletElbow_Origin :=
    EtInletElbow_Origin0 if EN_EtGrit == 0
    EtInletElbow_Origin1 otherwise
EtInletElbow2_Origin := Et_Origin + [
    0 m;
    (ConRadius(ND_EtOverflowDrain) + S_Fitting + ConRadius(ND_EtInlet));
    H_Et + ConRadius(ND_EtInlet)
]
# New Front Inlet Origin
EtInletElbow2_Origin := Et_Origin + [0 m; L_EtHopperFront + (-ConRadius(ND_EtOverflowDrain)); H_Et + ConRadius(ND_EtInlet)]
EtInletPipeLayer := layer_new("EtInletPipePlu", blue)
EtInletFittingLayer := layer_new("EtInletFittingPlu", green)
ND_EtInlet = 0.2032 m
EtInletElbow := ElbowF(EtInletElbow_Origin, [90; 0; 90]*deg, ND_EtInlet, PS_Default)
EtInletElbow2 := ElbowF(EtInletElbow2_Origin, [90; 0; 90]*deg, ND_EtInlet, PS_Default)
L_EtInletPipe := 1 m
EtInletPipe := PipeF(EtInletElbow_Origin + [L_EtInletPipe; 0; 0], L_EtInletPipe, [0; 0; 0]*deg, ND_EtInlet, PS_Default)
EtInletPipe2 := PipeF(EtInletElbow2_Origin + [L_EtInletPipe; 0; 0], L_EtInletPipe, [0; 0; 0]*deg, ND_EtInlet, PS_Default)
FreezeEtInletPipe := FreezeLayer("EtInletPipePlu")
FreezeEtInletFittings := FreezeLayer("EtInletFittingPlu")
EtInletScript2 := stack(EtInletFittingLayer, EtInletElbow, EtInletElbow2, FreezeEtInletFittings, EtInletPipeLayer, EtInletPipe, EtInletPipe2, FreezeEtInletPipe)
# Add Water Levels
EtWaterLayer := layer_new("EtWater", blue2)
EtWater := BoxF(Et_Origin, [Et_Origin[0] - L_Et; Et_Origin[1] + W_Et; ZW_Et], [0; 0; 0]*deg)
EtRMPipeWater := CylinderF(RMElbow_Origin + [0; ElbowRadius(ND_RMPipe); ElbowRadius(ND_RMPipe)], innerdiameter(ND_RMPipe, PS_Default)/2, ZW_RMPipe - RMElbow_Origin[2] - ElbowRadius(ND_RMPipe), [0; 90]*deg)
EtWaterFrz := FreezeLayer("EtWater")
EtWaterScript := stack(EtWaterLayer, EtWater, EtRMPipeWater, EtWaterFrz)
AC_EntranceeeeeTank :=
    stack(EtTankScript, EtTrashRackScript, EtOverflowPluScript0, EtDrainsRight, RMScript, FlowControlScript0, EtInletScript) if EN_EtGrit == 0 and EN_TwoInlets == 0 and EN_LfomPipe == 1
    stack(EtTankScript2, EtTrashRackScript, EtOverflowPluScript2, EtDrainsRight2Inlets, RMScript, FlowControlScript2, EtInletScript2) if EN_EtGrit == 0 and EN_TwoInlets == 1 and EN_LfomPipe == 1
    stack(EtTankScript, ModificationScript, EtTrashRackScript, EtOverflowPluScript0, EtDrainsRight, LfomChannelScript, FlowControlScript0, EtInletScript) if EN_EtGrit == 0 and EN_LfomPipe == 0 and EN_TwoInlets == 0
    stack(EtTankScript2, ModificationScript, EtTrashRackScript, EtOverflowPluScript2, EtDrainsRight2Inlets, LfomChannelScript, FlowControlScript2, EtInletScript2) if EN_EtGrit == 0 and EN_LfomPipe == 0 and EN_TwoInlets == 1
    stack(EtTankScript, EtOverflowPluScript1, RMScript, FlowControlScript1, EtInletScript) otherwise
AC_EntranceTankWater :=
    stack(EtTankScript, EtTrashRackScript, EtOverflowPluScript0, EtDrainsRight, RMScript, FlowControlScript0, EtInletScript, EtWaterScript) if EN_EtGrit == 0 and EN_TwoInlets == 0 and EN_LfomPipe == 1
    stack(EtTankScript2, EtTrashRackScript, EtOverflowPluScript2, EtDrainsRight2Inlets, RMScript, FlowControlScript2, EtInletScript2, EtWaterScript) if EN_EtGrit == 0 and EN_TwoInlets == 1 and EN_LfomPipe == 1
    stack(EtTankScript, ModificationScript, EtTrashRackScript, EtOverflowPluScript0, EtDrainsRight, LfomChannelScript, FlowControlScript0, EtInletScript, EtWaterScript) if EN_EtGrit == 0 and EN_LfomPipe == 0 and EN_TwoInlets == 0
    stack(EtTankScript2, ModificationScript, EtTrashRackScript, EtOverflowPluScript2, EtDrainsRight2Inlets, LfomChannelScript, FlowControlScript2, EtInletScript2, EtWaterScript) if EN_EtGrit == 0 and EN_LfomPipe == 0 and EN_TwoInlets == 1
    stack(EtTankScript, EtOverflowPluScript1, RMScript, FlowControlScript1, EtInletScript, EtWaterScript) otherwise
EN_LfomPipe = 1
AC_EntranceTank :=
    AC_EntranceTank if EN_Water == 0
    AC_EntranceTankWater otherwise  # error: This variable is undefined.
Check := stack(EtTankScript, ModificationScript)
