T_EtFloat := 5 cm
ND_EtMod := ND_SedMod
ND_EtModSpacer := ND_SedModSpacer
S_EtLaminaPipeToEdge := 5 cm
# Entrance Tank (In floc channel)
ND_EtPlateSupport := 3 in
ND_RMPlateRestrainer := 1/2*in
# Layers
EtConLayer := layer_new("EtCon", grey)
SelectEtCon := SelectLayer("EtCon")
EtConFrz := FreezeLayer("EtCon")
SubtractFromEtCon := SubtractF(["EtCon"], "DeleteMe")
EtPipeLayer := layer_new("EtPipePlu", blue)
SelectEtPipes := SelectLayer("EtPipePlu")
EtPipeFrz := FreezeLayer("EtPipePlu")
EtFittingLayer := layer_new("EtFittingPlu", green)
SelectEtFittings := SelectLayer("EtFittingPlu")
EtFittingFrz := FreezeLayer("EtFittingPlu")
EtRemovableLayer := layer_new("EtRemovablePlu", red)
SelectEtRemovable := SelectLayer("EtRemovablePlu")
EtRemovableFrz := FreezeLayer("EtRemovablePlu")
EtModPlateLayer := layer_new("EtModPlate", purple)
SelectEtModPlate := SelectLayer("EtModPlate")
EtModPlateFrz := FreezeLayer("EtModPlate")
EtModPlateRigidLayer := layer_new("EtModPlateRigid", orange)
SelectEtModPlateRigid := SelectLayer("EtModPlateRigid")
EtModPlateRigidFrz := FreezeLayer("EtModPlateRigid")
EtModPipeLayer := layer_new("EtModPipePlu", blue3)
SelectEtModPipe := SelectLayer("EtModPipePlu")
EtModPipeFrz := FreezeLayer("EtModPipePlu")
EtModSpacerLayer := layer_new("EtModSpacerPlu", blue)
SelectEtModSpacer := SelectLayer("EtModSpacerPlu")
EtModSpacerFrz := FreezeLayer("EtModSpacerPlu")
EtModCapLayer := layer_new("EtModCapPlu", red)
SelectEtModCap := SelectLayer("EtModCapPlu")
EtModCapFrz := FreezeLayer("EtModCapPlu")
EtRMPipeLayer := layer_new("EtRMPipePlu", blue)
SelectEtRMPipe := SelectLayer("EtRMPipePlu")
EtRMPipeFrz := FreezeLayer("EtRMPipePlu")
SubtractFromEtRMPipe := SubtractF(["EtRMPipePlu"], "DeleteMe")
EtRMFittingLayer := layer_new("EtRMFittingPlu", green)
SelectEtRMFitting := SelectLayer("EtRMFittingPlu")
EtRMFittingFrz := FreezeLayer("EtRMFittingPlu")
EtRMPlateLayer := layer_new("EtRMPlate", red)
SelectEtRMPlate := SelectLayer("EtRMPlate")
EtRMPlateFrz := FreezeLayer("EtRMPlate")
SubtractFromEtRMPlate := SubtractF(["EtRMPlate"], "DeleteMe")
EtEntPipeLayer := layer_new("EtEntPipePlu", blue)
SelectEtEntPipe := SelectLayer("EtEntPipePlu")
EtEntPipeFrz := FreezeLayer("EtEntPipePlu")
EtEntFittingLayer := layer_new("EtEntFittingPlu", green)
SelectEtEntFitting := SelectLayer("EtEntFittingPlu")
EtEntFittingFrz := FreezeLayer("EtEntFittingPlu")
SubtractFromEtEntFitting := SubtractF(["EtEntFittingPlu"], "DeleteMe")
EtTrashRackLayer := layer_new("EtTrashRack", orange)
SelectEtTrashRack := SelectLayer("EtTrashRack")
EtTrashRackFrz := FreezeLayer("EtTrashRack")
SubtractFromEtTrashRack := SubtractF(["EtTrashRack"], "DeleteMe")
EtFloatLayer := layer_new("EtFloat", red)
SelectEtFloat := SelectLayer("EtFloat")
EtFloatFrz := FreezeLayer("EtFloat")
EtPlateSupportFittingLayer := layer_new("EtPlateSupportFittingPlu", green)
SelectEtPlateSupportFitting := SelectLayer("EtPlateSupportFittingPlu")
EtPlateSupportFittingFrz := FreezeLayer("EtPlateSupportFittingPlu")
EtPlateSupportPipeLayer := layer_new("EtPlateSupportPipePlu", blue)
SelectEtPlateSupportPipe := SelectLayer("EtPlateSupportPipePlu")
EtPlateSupportPipeFrz := FreezeLayer("EtPlateSupportPipePlu")
# Entrance tank masonry
Et_Origin := Floc_Origin + [-L_Floc + L_Et; (N_FlocChannels - 1)*(W_FlocChannel + T_FlocDividingWall); 0 m]
Et_Dim := [L_Et; W_Et; H_Et]
EntranceTankLower := Tank(Et_Origin + [-L_EtSlope2; 0 m; 0 m], Et_Dim + [-L_EtSlope2; 0 m; 0 m], T_FlocDividingWall)
EntranceTankUpper := Tank(Et_Origin + [0 m; 0 m; Z_EtUpperSlab - Z_FlocBottom], [L_EtSlope2 - T_FlocDividingWall; W_Et; H_EtUpper], T_FlocDividingWall)
Et_BaseBox1 := BoxF(Et_Origin + [-L_EtSlope2; 0 m; 0 m], Et_Origin + [-L_Et; W_Et; H_EtDrain], [0; 0; 0]*deg)
Et_Slope1 := WedgeF(Et_Origin + [-L_Et + S_Fitting/2 + 2*ConRadius(ND_EtDrain) + L_EtSlope1; 0 m; H_EtDrain], Et_Origin + [-L_Et + S_Fitting/2 + 2*ConRadius(ND_EtDrain); W_Et; H_EtDrain + H_EtSlope1], [0; 0; 0]*deg)
Et_Slope2 := WedgeF(Et_Origin + [0 m; 0 m; H_EtDrain + H_EtSlope1], Et_Origin + [-L_EtSlope2; W_Et; H_EtDrain + H_EtSlope1 + H_EtSlope2], [0; 0; 0]*deg)
EtWestWallThicken :=
    BoxF(Et_Origin + [-L_Et - T_FlocDividingWall; -T_FlocDividingWall; -T_FlocSlab], Et_Origin + [-L_Et - T_FlocWall; W_Et + T_FlocWall; Z_EtTop - Et_Origin[2]], [0; 0; 0]*deg) if T_FlocWall > T_FlocDividingWall
    view("t") otherwise
EtNorthWallThicken1 :=
    if T_FlocWall > T_FlocDividingWall
        BoxF(Et_Origin + [-L_Et - T_FlocWall; W_Et + T_FlocDividingWall; -T_FlocSlab], Et_Origin + [
            -L_Et + S_Fitting/2 + 2*ConRadius(ND_EtDrain) + L_EtSlope1 + T_FlocDividingWall;
            W_Et + T_FlocWall;
            Z_EtTop - Et_Origin[2]
        ], [0; 0; 0]*deg)
    view("t") otherwise
EtNorthWallThicken2 :=
    BoxF(Et_Origin + [-L_EtSlope2; W_Et + T_FlocDividingWall; Z_EtUpperSlab - T_EtUpperSlab - Et_Origin[2]], Et_Origin + [T_FlocDividingWall; W_Et + T_FlocWall; Z_EtTop - Et_Origin[2]], [0; 0; 0]*deg) if T_FlocWall > T_FlocDividingWall
    view("t") otherwise
EtSlabThicken :=
    BoxF(Et_Origin + [-L_EtSlope2 + T_FlocDividingWall; -T_FlocDividingWall; -T_FlocSlab], Et_Origin + [-L_Et - T_FlocWall; W_Et + T_FlocWall; -T_FlocDividingWall], [0; 0; 0]*deg) if T_FlocSlab > T_FlocDividingWall
    view("t") otherwise
EtUpperSlabThicken :=
    BoxF(Et_Origin + [T_FlocDividingWall; -T_FlocDividingWall; Z_EtUpperSlab - T_EtUpperSlab - Et_Origin[2]], Et_Origin + [-L_EtSlope2; W_Et + T_FlocWall; Z_EtUpperSlab - T_FlocDividingWall - Et_Origin[2]], [0; 0; 0]*deg) if T_EtUpperSlab > T_FlocDividingWall
    view("t") otherwise
[Et_Origin[0] - L_Et; Et_Origin[1]; Et_Origin[2] + H_EtDrain] + [0 m; 0 m; -zc]
EtSideSlopePline := Pline3D([
    [Et_Origin[0] - L_Et; Et_Origin[1]; Et_Origin[2] + H_EtDrain] + [0 m; 0 m; -zc];
    [Et_Origin[0] - L_Et; Et_Origin[1]; Et_Origin[2] + H_EtDrain] + [
        0 m;
        0 m;
        (N_EtPlates*B_EtPlate*sin(AN_EtPlate) - (ConRadius(ND_EtDrain) - outerradius(ND_EtDrain)))*tan(AN_EtPlate) + S_EtPlate*cos(AN_EtPlate)
    ];
    [Et_Origin[0] - L_Et; Et_Origin[1]; Et_Origin[2] + H_EtDrain] + [0 m; W_Et/2 - ConRadius(ND_EtDrain); 0 m];
    [Et_Origin[0] - L_Et; Et_Origin[1]; Et_Origin[2] + H_EtDrain] + [0 m; W_Et/2 + ConRadius(ND_EtDrain); 0 m];
    [Et_Origin[0] - L_Et; Et_Origin[1]; Et_Origin[2] + H_EtDrain] + [
        0 m;
        W_Et;
        (N_EtPlates*B_EtPlate*sin(AN_EtPlate) - (ConRadius(ND_EtDrain) - outerradius(ND_EtDrain)))*tan(AN_EtPlate) + S_EtPlate*cos(AN_EtPlate)
    ];
    [Et_Origin[0] - L_Et; Et_Origin[1]; Et_Origin[2] + H_EtDrain] + [0 m; W_Et; -zc];
    [Et_Origin[0] - L_Et; Et_Origin[1]; Et_Origin[2] + H_EtDrain] + [0 m; 0 m; -zc]
])
ExtrudeEtSides := ExtrudeLast(L_Et - L_EtSlope2)
EtUpperWallCut := BoxF(Et_Origin + [-L_EtSlope2 + T_FlocDividingWall; 0 m; Z_EtUpperSlab - Z_FlocBottom], Et_Origin + [-L_EtSlope2; W_Et; Z_EtUpperSlab - Z_FlocBottom + H_EtUpper + zc], [0; 0; 0]*deg)
EtSlabCut :=
    BoxF(Et_Origin + [T_FlocDividingWall; -T_FlocDividingWall; -T_FlocSlab], Et_Origin + [-L_Et - T_FlocWall; W_Et + T_FlocWall; -T_FlocDividingWall], [0; 0; 0]*deg) if T_FlocDividingWall > T_FlocSlab
    view("t") otherwise
EtUpperSlabCut :=
    BoxF(Et_Origin + [T_FlocDividingWall; -T_FlocDividingWall; Z_EtUpperSlab - T_EtUpperSlab - Et_Origin[2]], Et_Origin + [-L_EtSlope2; W_Et + T_FlocWall; Z_EtUpperSlab - T_FlocDividingWall - Et_Origin[2]], [0; 0; 0]*deg) if T_FlocDividingWall > T_EtUpperSlab
    view("t") otherwise
EtConScript := stack(EtConLayer, EntranceTankLower, EntranceTankUpper, Union_All, EtConFrz, EtUpperWallCut, EtSlabCut, EtUpperSlabCut, GroupDelete, SubtractFromEtCon, SelectEtCon, Et_BaseBox1, Et_Slope1, Et_Slope2, EtWestWallThicken, EtNorthWallThicken1, EtNorthWallThicken2, EtSlabThicken, EtUpperSlabThicken, EtSideSlopePline, ExtrudeEtSides, Union_All, EtConFrz)
# Entrance tank drain
EtDrainCoupling_Origin := Et_Origin + [
    -L_Et + S_Fitting/2 + ConRadius(ND_EtDrain);
    W_Et/2;
    H_EtDrain - CouplingLength(ND_EtDrain) + SocketDepth(ND_EtDrain)
]
EtDrainVertPipe_Origin := EtDrainCoupling_Origin
EtDrainElbow_Origin := [
    EtDrainCoupling_Origin[0] - ElbowRadius(ND_EtDrain);
    EtDrainCoupling_Origin[1];
    Plant_Origin[2] - ConRadius(ND_EtDrain)
]
L_EtDrainVertPipe := EtDrainCoupling_Origin[2] - EtDrainElbow_Origin[2] - ElbowRadius(ND_EtDrain)
EtDrainHorizPipe_Origin := EtDrainElbow_Origin
L_EtDrainHorizPipe := EtDrainElbow_Origin[0] - (Et_Origin[0] - L_Et - T_FlocWall)
EtDrainStub_Origin := EtDrainCoupling_Origin + [0 m; 0 m; CouplingLength(ND_EtDrain) - 2*SocketDepth(ND_EtDrain)]
EtDrainVertPipe := PipeSUBF(EtDrainVertPipe_Origin, L_EtDrainVertPipe, [0; -90]*deg, ND_EtDrain, PS_Default, ["EtCon"])
EtDrainHorizPipe := PipeSUBF(EtDrainHorizPipe_Origin, L_EtDrainHorizPipe, [0; 0]*deg, ND_EtDrain, PS_Default, ["EtCon"])
EtDrainCoupling := CouplingSUBF(EtDrainCoupling_Origin, [0; 90]*deg, ND_EtDrain, PS_Default, ["EtCon"])
EtDrainElbow := ElbowSUBF(EtDrainElbow_Origin, [-90; 0; 90]*deg, ND_EtDrain, PS_Default, ["EtCon"])
EtDrainStub := PipeF(EtDrainStub_Origin, Z_EtTop + 30 cm - EtDrainStub_Origin[2], [0; 90]*deg, ND_EtDrain, PS_Default)
EtDrainScript := stack(EtPipeLayer, EtDrainVertPipe, EtDrainHorizPipe, EtPipeFrz, EtFittingLayer, EtDrainCoupling, EtDrainElbow, EtFittingFrz, EtRemovableLayer, EtDrainStub, EtRemovableFrz)
# Plate settler module
EtPlate_Origin := Et_Origin + [
    -L_Et + L_EtWallToPlate + (T_SedPlate*N_EtPlates + S_EtPlate*(N_EtPlates - 1))*sin(AN_EtPlate);
    0 m;
    H_EtDrain + S_Fitting*tan(AN_EtPlate) + (CapHeight(ND_EtMod) + T_SedPlate + (N_EtPlates - 1)*B_EtPlate)*sin(AN_EtPlate)*tan(AN_EtPlate) + CapHeight(ND_EtMod)*cos(AN_EtPlate)
]
EtPlateLast_Origin := EtPlate_Origin + [-(N_EtPlates - 1)*B_EtPlate; 0 m; 0 m]
EtPlateRigid_Origin := EtPlateLast_Origin + [-T_SedPlate; 0 m; 0 m]
EtModCap1_Origin := EtPlate_Origin + [
    CapHeight(ND_EtMod) - CapThickness(ND_EtMod);
    S_EtLaminaPipeToEdge + outerradius(ND_EtMod);
    S_EtLaminaPipeToEdge + outerradius(ND_EtMod)
]
EtModCap2_Origin := EtModCap1_Origin + [
    -N_EtPlates*T_SedPlate - (N_EtPlates - 1)*S_EtPlate - T_Acrylic - 2*(CapHeight(ND_EtMod) - CapThickness(ND_EtMod));
    0 m;
    0 m
]
EtModPipe_Origin := EtModCap1_Origin
L_EtModPipe := N_EtPlates*T_SedPlate + (N_EtPlates - 1)*S_EtPlate + T_Acrylic + 2*(CapHeight(ND_EtMod) - CapThickness(ND_EtMod))
EtModSpacer_Origin := EtModCap1_Origin + [-(CapHeight(ND_EtMod) - CapThickness(ND_EtMod)) - T_SedPlate; 0 m; 0 m]
EtPlate := BoxF(EtPlate_Origin, EtPlate_Origin + [-T_SedPlate; W_Et; L_EtPlate], [0; 0; 0]*deg)
EtPlateLast := BoxF(EtPlateLast_Origin, EtPlateLast_Origin + [-T_SedPlate; W_Et; L_EtPlate + L_EtTopPlateExtension], [0; 0; 0]*deg)
EtPlateRigid := BoxF(EtPlateRigid_Origin, EtPlateRigid_Origin + [-T_Acrylic; W_Et; L_EtPlate + L_EtTopPlateExtension], [0; 0; 0]*deg)
EtModCap1 := CapF(EtModCap1_Origin, [0; 0; 0]*deg, ND_EtMod)
EtModCap2 := CapF(EtModCap2_Origin, [180; 0; 0]*deg, ND_EtMod)
EtModPipe := PipeF(EtModPipe_Origin, L_EtModPipe, [0; 0]*deg, ND_EtMod, PS_Modules)
EtModSpacer := PipeF(EtModSpacer_Origin, S_EtPlate, [0; 0]*deg, ND_EtModSpacer, PS_Modules)
ArrayEtPlates := ArrayLast(1, N_EtPlates - 1, -B_EtPlate)
ArrayEtModSpacers := ArrayLast(1, N_EtPlates - 1, -B_SedPlate)
ArrayEtModPlu1 := array_all(2, 1, L_EtPlate - 2*S_EtLaminaPipeToEdge - outerdiameter(ND_EtMod))
ArrayEtModPlu2 := array_all(1, 3, (W_Et - 2*S_EtLaminaPipeToEdge - outerdiameter(ND_EtMod))/2)
RotateEtMod := Rotate_All([EtPlate_Origin[0]; EtPlate_Origin[2]; EtPlate_Origin[1]], -(90 deg - AN_EtPlate))
ThawEtModPlu := ThawMultiple(["EtMod*Plu"])
FreezeEt := FreezeMultiple(["Et*"])
ThawEtMod := ThawMultiple(["EtMod*"])
EtModArrayScript := stack(ThawEtModPlu, view("r"), ArrayEtModPlu1, ArrayEtModPlu2, FreezeEt, ThawEtMod, view("f"), RotateEtMod, view("t"), FreezeEt)
EtModScript := stack(EtModPlateLayer, EtPlate, ArrayEtPlates, EtPlateLast, EtModPlateFrz, EtModPlateRigidLayer, EtPlateRigid, EtModPlateRigidFrz, EtModCapLayer, EtModCap1, EtModCap2, EtModCapFrz, EtModPipeLayer, EtModPipe, EtModPipeFrz, EtModSpacerLayer, EtModSpacer, ArrayEtModSpacers, EtModSpacerFrz, EtModArrayScript)
# Plate module support pipes
EtPlateSupportCoupling1_Origin := EtPlate_Origin + [
    (CapHeight(ND_EtMod) + SocketDepth(ND_EtPlateSupport))*sin(AN_EtPlate) - outerradius(ND_EtPlateSupport)*cos(AN_EtPlate);
    S_Fitting + ConRadius(ND_EtPlateSupport);
    -(CapHeight(ND_EtMod) + SocketDepth(ND_EtPlateSupport))*cos(AN_EtPlate) - outerradius(ND_EtPlateSupport)*sin(AN_EtPlate)
]
EtPlateSupportCoupling2_Origin := EtPlateSupportCoupling1_Origin + [0 m; W_Et - 2*S_Fitting - 2*ConRadius(ND_EtPlateSupport); 0 m]
EtPlateSupportCoupling1 := CouplingSUBF(EtPlateSupportCoupling1_Origin, [0 deg; 270 deg - AN_EtPlate], ND_EtPlateSupport, PS_Default, ["EtCon"])
EtPlateSupportCoupling2 := CouplingSUBF(EtPlateSupportCoupling2_Origin, [0 deg; 270 deg - AN_EtPlate], ND_EtPlateSupport, PS_Default, ["EtCon"])
EtPlateSupportPipe1 := PipeF(EtPlateSupportCoupling1_Origin, SocketDepth(ND_EtPlateSupport) + CapHeight(ND_EtMod) + N_EtPlates*T_SedPlate + (N_EtPlates - 1)*S_EtPlate + T_Acrylic, [0 deg; 90 deg - AN_EtPlate], ND_EtPlateSupport, PS_Default)
EtPlateSupportPipe2 := PipeF(EtPlateSupportCoupling2_Origin, SocketDepth(ND_EtPlateSupport) + CapHeight(ND_EtMod) + N_EtPlates*T_SedPlate + (N_EtPlates - 1)*S_EtPlate + T_Acrylic, [0 deg; 90 deg - AN_EtPlate], ND_EtPlateSupport, PS_Default)
EtPlateSupportScript := stack(EtPlateSupportFittingLayer, EtPlateSupportCoupling1, EtPlateSupportCoupling2, EtPlateSupportFittingFrz, EtPlateSupportPipeLayer, EtPlateSupportPipe1, EtPlateSupportPipe2, EtPlateSupportPipeFrz)
# Rapid mix/LFOM
# Rapid mix pipe and fittings
RMCoupling_Origin := Et_Origin + [-2*S_Fitting - ConRadius(ND_RMPipe); W_Et/2; Z_SedWeirExit]
RMPipe_Origin := RMCoupling_Origin + [0 m; 0 m; CouplingLength(ND_RMPipe) - 2*SocketDepth(ND_RMPipe)]
EtRMPipe := PipeSUBF(RMPipe_Origin, Z_EtTop - RMPipe_Origin[2], [0; 90]*deg, ND_RMPipe, PS_Default, ["EtCon"])
EtRMCoupling := CouplingSUBF(RMCoupling_Origin, [0; 90]*deg, ND_RMPipe, PS_Default, ["EtCon"])
LFOM_Origin := [RMPipe_Origin[0]; RMPipe_Origin[1]; Plant_Origin[2] + Z_LfomBottom]
LfomOrifices :=
    Local ← EtRMPipeFrz
    for h ∈ 0 .. last(H_LfomOrifices)
        if N_LfomOrifices[h] ≠ 0
            Local ← stack(Local, CylinderF([LFOM_Origin[0]; LFOM_Origin[1]; LFOM_Origin[2] + H_LfomOrifices[h]], D_LfomOrifices/2, outerradius(ND_RMPipe) + zc, [
                90 deg + (asin(0.5*S_LfomOrificesMin/(2*outerradius(ND_RMPipe))) + asin(D_LfomOrifices/(2*outerradius(ND_RMPipe))))*(mod(h, 2) == 0);
                0 deg
            ]))
        Local ← stack(Local, ArrayLastPolar([LFOM_Origin[0]; LFOM_Origin[1]; LFOM_Origin[2] + H_LfomOrifices[h]], N_LfomOrifices[h], (N_LfomOrifices[h] - 1)*(2*asin(D_LfomOrifices/(2*outerradius(ND_RMPipe))) + 2*asin(S_LfomOrificesMin/(2*outerradius(ND_RMPipe)))))) if N_LfomOrifices[h] > 1
    return Local
RMPlumbingScript := stack(EtRMFittingLayer, EtRMCoupling, EtRMFittingFrz, EtRMPipeLayer, EtRMPipe, LfomOrifices, GroupDelete, SubtractFromEtRMPipe)
# Rapid Mix Orifice
RMOrificePlate := CylinderF(RMCoupling_Origin, outerradius(ND_RMPipe), T_RMOrificePlate, [0; -90; 0]*deg)
RMOrifice := CylinderF(RMCoupling_Origin, D_RMOrifice/2, T_RMOrificePlate, [0; -90; 0]*deg)
RMPlateRestrainer := PipeSUBF(RMCoupling_Origin + [ConRadius(ND_RMPipe) + zc; 0 m; -T_RMOrificePlate - outerradius(ND_RMPlateRestrainer)], 2*ConRadius(ND_RMPipe) + 2*zc, [0; 0]*deg, ND_RMPlateRestrainer, PS_Modules, ["EtRMFittingPlu"])
RMOrificePlateScript := stack(EtRMPlateLayer, RMOrificePlate, EtRMPlateFrz, RMOrifice, GroupDelete, SubtractFromEtRMPlate, SelectEtRMPipe, RMPlateRestrainer, EtRMPipeFrz)
RMScript := stack(RMPlumbingScript, RMOrificePlateScript)
# Entrance pipe
EntElbow_Origin := [
    Et_Origin[0] - L_Et + 5*S_Fitting/2 + 2*ConRadius(ND_EtDrain) + ConRadius(ND_ConductionLine);
    Et_Origin[1] + W_Et/2;
    Z_EtTop + ConRadius(ND_ConductionLine) - ElbowRadius(ND_ConductionLine)
]
EntTee_Origin := [
    Et_Origin[0] - L_Et + 5*S_Fitting/2 + 2*ConRadius(ND_EtDrain) + ConRadius(ND_ConductionLine);
    Et_Origin[1] + W_Et/2;
    min(EntElbow_Origin[2] - 2*SocketDepth(ND_ConductionLine), ZW_EtMax - ConRadius(ND_ConductionLine) + ShortTeeLength(ND_ConductionLine))
]
EntHorizPipe_Origin := EntElbow_Origin + [0 m; ElbowRadius(ND_ConductionLine); ElbowRadius(ND_ConductionLine)]
EntElbow := ElbowF(EntElbow_Origin, [-90; -90; 0]*deg, ND_ConductionLine, PS_Default)
EntTee := TeeF(EntTee_Origin, [90; 90; 0]*deg, ND_ConductionLine, PS_Default)
EntVertPipe := PipeF(EntTee_Origin, EntElbow_Origin[2] - EntTee_Origin[2], [0; 90]*deg, ND_ConductionLine, PS_Default)
EntHorizPipe := PipeF(EntHorizPipe_Origin, 0.5 m, [-90; 0]*deg, ND_ConductionLine, PS_Default)
EntTeeCut1 := BoxF([
    EntTee_Origin[0] - ConRadius(ND_ConductionLine) - zc;
    EntTee_Origin[1] - TeeLength(ND_ConductionLine)/2 - SocketDepth(ND_ConductionLine) - zc;
    EntTee_Origin[2] - ShortTeeLength(ND_ConductionLine) - ConRadius(ND_ConductionLine) - zc
], [
    EntTee_Origin[0] + ConRadius(ND_ConductionLine) + zc;
    Et_Origin[1] + 2*S_Fitting;
    EntTee_Origin[2] - ShortTeeLength(ND_ConductionLine) + ConRadius(ND_ConductionLine) + zc
], [0; 0; 0]*deg)
EntTeeCut2 := BoxF([
    EntTee_Origin[0] - ConRadius(ND_ConductionLine) - zc;
    EntTee_Origin[1] + TeeLength(ND_ConductionLine)/2 + SocketDepth(ND_ConductionLine) + zc;
    EntTee_Origin[2] - ShortTeeLength(ND_ConductionLine) - ConRadius(ND_ConductionLine) - zc
], [
    EntTee_Origin[0] + ConRadius(ND_ConductionLine) + zc;
    Et_Origin[1] + W_Et - 2*S_Fitting;
    EntTee_Origin[2] - ShortTeeLength(ND_ConductionLine) + ConRadius(ND_ConductionLine) + zc
], [0; 0; 0]*deg)
EntrancePipeScript := stack(EtEntPipeLayer, EntVertPipe, EntHorizPipe, EtEntPipeFrz, EtEntFittingLayer, EntElbow, EntTee, EtEntFittingFrz, EntTeeCut1, EntTeeCut2, GroupDelete, SubtractFromEtEntFitting)
# Trash rack
EtTrashRack_Origin := Et_Origin + [
    -L_Et + L_EtWallToPlate - T_Acrylic*sin(AN_EtPlate);
    -zc;
    H_EtDrain + S_Fitting*tan(AN_EtPlate) + (CapHeight(ND_EtMod) + T_SedPlate + (N_EtPlates - 1)*B_EtPlate)*sin(AN_EtPlate)*tan(AN_EtPlate) + (CapHeight(ND_EtMod) + N_EtPlates*T_SedPlate + (N_EtPlates - 1)*S_EtPlate + T_Acrylic)*cos(AN_EtPlate)
]
EtTrashRack := BoxF(EtTrashRack_Origin, EtTrashRack_Origin + [-T_Acrylic; W_Et + 2*zc; Z_EtTop - EtTrashRack_Origin[2]], [0; 0; 0]*deg)
EtTrashRackHole := CylinderF(EtTrashRack_Origin + [zc; zc + S_EtTrashRackHole + D_EtTrashRackHole/2; zc + S_EtTrashRackHole + D_EtTrashRackHole/2], D_EtTrashRackHole/2, T_Acrylic + 2*zc, [0; 0]*deg)
ArrayEtTrashRackHolesY := ArrayLast(1, N_EtTrashRackHolesHoriz, S_EtTrashRackHole + D_EtTrashRackHole)
ArrayEtTrashRackHolesZ := Array_All(N_EtTrashRackHolesVert, 1, S_EtTrashRackHole + D_EtTrashRackHole)
EtTrashRackScript := stack(EtTrashRack, GroupDelete, SubtractFromEtCon, EtTrashRackLayer, EtTrashRack, EtTrashRackFrz, EtTrashRackHole, view("r"), ArrayEtTrashRackHolesY, ArrayEtTrashRackHolesZ, view("t"), GroupDelete, SubtractFromEtTrashRack)
# Chemical dose controller
EtFloat_Origin := [
    Et_Origin[0] - L_Et + L_EtFrontWallToFloat + ConRadius(ND_EtFloat);
    Et_Origin[1] + W_Et/2;
    ZW_EtMax - T_EtFloat/2
]
L_CdcLever
EtFloat := CylinderF(EtFloat_Origin, ConRadius(ND_EtFloat), T_EtFloat, [0; 90]*deg)
EtFloatScript := stack(EtFloatLayer, EtFloat, EtFloatFrz)
AC_EntranceTank := stack(EtConScript, EtDrainScript, EtModScript, EtPlateSupportScript, RMScript, EntrancePipeScript, EtTrashRackScript, EtFloatScript)
