# Entrance Tank
L_CdcLever := 45 cm
# Flow Control Drain and Entrance Tank Walkway
# This feature is a pipe with a gate valve draining into the entrance tank drain channel from a pipe out of the entrance tank's first hopper. The purpose is to control the plant flow by wasting a certain amount of the influent. The operator will need to learn empirically how many turns of the valve handle will give the desired flow rates, which he will read off of a scale in the entrance tank.
HW_EtEst := 0.8 m
L_EtFlowControlPipeEst := 2 m
ND_EtFlowControl := D_pipeschedule(Q_Plant, PS_Default, HW_EtEst, L_EtFlowControlPipeEst, Nu_Water, E_Pvc, K_PipeExit + K_PipeEnt + K_GateValve + 2*K_El90)
ND_EtOverflowDrain := D_PipeChannel(Q_Plant/2, PS_Default)
ND_EtInlet := D_pipe(Q_Plant, AvailND, 1 m, 100 m, Nu_Water, E_Concrete, K_PipeEnt + K_PipeExit)
ND_EtDrain := 1.5 in
# Length, Width, and Hopper Calculations (grit =0)
W_EtDCFloat := max(2*S_Fitting + 2*(ConRadius(ND_EtDrain) + ConRadius(ND_RMPipe)), L_CdcLever - T_PlantWall + ConRadius(ND_EtFloat) + S_Fitting/5)
# Minimum width to satisfy geometric constraints
W_EtLfomFloat := 2*ConRadius(ND_EtFloat) + S_EtFloat + 2*ConRadius(ND_RMPipe) + 2*S_Fitting + 2*ConRadius(ND_EtDrain)
L_EtMax := L_Sed  # maximum length to prevent enlarging the plant footprint
H_EtHopperMin := 10 cm  # so that the hoppers aren't so small that they need to be drained frequently
H_EtHopperMax := HW_EtMax - HL_Flowmeasure  # so that the entrance tank doesn't get too deep
L_EtCaptureEffectiveMin(W_Et) := Q_Plant/V_EtUpMin/W_Et  # Length needed for grit removal
L_EtHopperLfomMin := (2*ConRadius(ND_EtFloat) + S_EtFloat) + 2*ConRadius(ND_EtDrain) + 2*S_Fitting
# Minimum length needed for the hopper with the LFOM due to diameter of the float the LFOM
L_EtHopperInletMin(W_Et, L_EtHopperLfom) :=
    L_EtMax - L_EtHopperLfom - T_EtHopperLedge if (L_EtHopperLfom - S_Fitting - 2*ConRadius(ND_RMPipe)) ≥ L_EtCaptureEffectiveMin(W_Et) and L_EtHopperLfom > (L_EtMax - T_EtHopperLedge)/2
    (L_EtMax - T_EtHopperLedge)/2 if (L_EtHopperLfom - S_Fitting - 2*ConRadius(ND_RMPipe)) ≥ L_EtCaptureEffectiveMin(W_Et) and L_EtHopperLfom ≤ (L_EtMax - T_EtHopperLedge)/2
    L_EtCaptureEffectiveMin(W_Et) - (L_EtHopperLfom - S_Fitting - 2*ConRadius(ND_RMPipe)) + 2*S_Fitting + 2*ConRadius(ND_EtInlet) otherwise
L_Sed =  # error: This variable is undefined.  # L.Et should be less than or equal to L.Sed
L_EtEst := L_EtHopperLfomMin + L_EtHopperInletMin(W_EtDCFloat, L_EtHopperLfomMin) + T_EtHopperLedge
L_EtHopperIn :=
    (L_EtHopperInletMin(W_EtDCFloat, L_EtHopperLfomMin) + L_EtHopperLfomMin)/2 if (L_EtHopperInletMin(W_EtDCFloat, L_EtHopperLfomMin) + L_EtHopperLfomMin)/2 ≥ L_EtHopperLfomMin
    L_EtHopperInletMin(W_EtDCFloat, L_EtHopperLfomMin) otherwise
# If the min lfom hopper length is less than the total length divided by two than the length of the hopper will be half the length of the total length minus the thickness of the ledge. This will make sure that the hoppers are even, but if this is not the case the hoppers will be two different lengths in order to make sure that the length of the entrance tank is no larger than the length of the flocculator and sed tank
L_EtHopperOut :=
    (L_EtHopperInletMin(W_EtDCFloat, L_EtHopperLfomMin) + L_EtHopperLfomMin)/2 if (L_EtHopperInletMin(W_EtDCFloat, L_EtHopperLfomMin) + L_EtHopperLfomMin)/2 ≥ L_EtHopperLfomMin
    L_EtHopperLfomMin otherwise  # HopperIn is the hopper where the inlet is. HopperOut is the hopper with the Lfom and CDC
W_Et := W_EtDCFloat
L_Et := L_EtHopperIn + L_EtHopperOut + T_EtHopperLedge
H_EtHopper := max(max(L_EtHopperIn, L_EtHopperOut)*tan(40 deg))
AN_EtSlopeIn := atan(H_EtHopper/(L_EtHopperIn - S_Fitting - 2*ConRadius(ND_EtDrain)))
AN_EtSlopeOut := atan(H_EtHopper/(L_EtHopperOut - S_Fitting - 2*ConRadius(ND_EtDrain)))
HW_Et := H_EtHopper + HL_Flowmeasure
H_EtTop := HL_Flowmeasure + H_PlantFreeboard
H_Et := HW_Et + H_PlantFreeboard
L_EtHopperFrontIn := L_EtHopperIn - 2*S_Fitting - 2*ConRadius(ND_RMPipe)
L_EtHopperFrontOut := L_EtHopperOut - 2*S_Fitting - 2*ConRadius(ND_RMPipe)
H_EtHopperFrontIn := min(H_EtHopper, tan(AN_EtSlopeIn)*L_EtHopperFrontIn)
H_EtHopperFrontOut := min(H_EtHopper, tan(AN_EtSlopeOut)*L_EtHopperFrontIn)
L_EtHopperBack := W_Et - 2*S_Fitting - 2*ConRadius(ND_EtDrain)
H_EtHopperBack := min(H_EtHopper, tan(60 deg)*L_EtHopperBack)
AN_EtHopperBackSlope := atan(H_EtHopperBack/L_EtHopperBack)
AN_EtHopperFrontSlopeIn := atan(H_EtHopperFrontIn/L_EtHopperFrontIn)
AN_EtHopperFrontSlopeOut := atan(H_EtHopperFrontOut/L_EtHopperFrontOut)
# Overflow Channel
W_EtOverflowSlot := innerdiameter(ND_EtOverflowDrain, PS_Default)*sin(acos(1 - 2*0.9))
# This sizes the slot such that only 10% of the vertical dimension of the pipe is cut away.
L_EtChannelPipesMin :=
    (0.5*(L_EtHopper/2 + ConRadius(ND_EtDrain) + S_Fitting) - ShortTeeLength(ND_EtOverflowDrain) - CapThickness(ND_EtOverflowDrain)) if EN_EtGrit == 0
    W_rectweir(Q_Plant, 5 cm)/2 otherwise
L_EtOverflowWeirMin :=
    (2*(L_EtHopper/2 + ConRadius(ND_EtDrain) + S_Fitting)) if EN_EtGrit == 0
    (2*L_EtChannelPipesMin) otherwise
H_EtOverflowCutaway := 0.1*innerdiameter(ND_EtOverflowDrain, PS_Default)
H_EtLFOMtoOverflow := 3 cm
# Heights and Elevations
D_RMOrifice := D_PipeED(E_MaxRM, Q_Plant, Pi_VenaContractaOrifice, Pi_JetRound)
HL_RMMicroOrifice := h_orifice(D_RMOrifice, Pi_VenaContractaOrifice, Q_Plant)
# estimate the length of RM pipe using:2*HW_EtMax + W_EtWalkway
HL_RMPipe := h_l(Q_Plant, innerdiameter(ND_RMPipe, PS_Default), 2*HW_EtMax + W_EtWalkway, K_El90 + K_PipeExit, Nu_Water, E_Pvc)
# estimate the length of RM pipe using:2*HW_EtMax + W_EtWalkway
ZW_RMPipe := HW_Sed + HL_Floc + HL_RMPipe + HL_RMMicroOrifice  # Elevation of the water inside the rapid mix pipe in the Tee outside the entrance tank
ZW_Et := ZW_RMPipe + H_Freefall + HL_Flowmeasure + HL_RMPipe
# elevation of the maximum water level in the entrance tank (relative to plant datum)
# This freefall is a safety factor inside the lfom
Z_EtTop := ZW_Et + H_PlantFreeboard  # Elevation of the top of the entrance tank walls (includes freeboard)
Z_Et := ZW_Et - HW_Et  # This is the elevation of the bottom slab of the entrance tank
# bottom elevation of entrance tank (same as the drain entrance elevation)
Z_EtHopper := Z_Et + H_EtHopper  # Top elevation of the first set of hoppers. (The peak of the pyramid)
Z_RmMicroMix := Z_SedWeirExit
# This is the maximum elevation of the micromix plate to ensure that it is submerged until the plant flow stops. Since we are putting the plate in the flocculator entrance coupling this should not be an issue.
# Linear case
Z_LfomOrifices := ZW_Et - HL_Flowmeasure + D_LfomOrifices/2
# elevation centers of the bottom orifices of the LFOM. The bottom of the bottom row of orifices is at the zero elevation
# Hopper Drains (grit only)
ND_EtDrain = 1.5 in
# Currently the drains are always set to 3in nominal diameter, but we are saving these calculations which design the drains more thoroughly.
Q_EtHopper := L_EtHopperOut*W_Et*H_EtHopper/(2*Ti_EtDrain)  # estimates the max flow out of each Hopper during cleaning
# Although this calculation is approximate it is adequate for designing the drains.
ND_EtDrainBetter := max(D_pipeschedule(Q_EtHopper, PS_Default, HW_Et, L_Et, Nu_Water, E_Pvc, K_PipeExit + K_PipeEnt), ND_EtDrainMin)
# Doser Elevations
ZW_CdcCht := Z_EtTop + H_DoserAssembly  # End of doser tube elevation at zero flow. (also fluid level in constant head tank)
Z_CdcFloatValveOrifice := ZW_CdcCht + H_CdcFloatvalve
Z_CoagulantOutlet := Z_CdcFloatValveOrifice + H_CoagTankAboveHeadTank  # This is the height of the outlet from the stock tanks
Z_CoagulantTankBottom := Z_CoagulantOutlet - B_StockOutlet  # This is the height of the coagulant stock tank base
## Trash Racks
N_TRSpacesV := ceil((W_Et + 4*D_Rebar)/(D_LfomOrifices/sqrt(2) + D_Rebar))  # number of spaces between rebar spanning the width of the entrance tank
B_EtRebar := (W_Et + 3*D_Rebar)/N_TRSpacesV
# number of spaces between rebar spanning the heigth of the top of the entrance tank
N_TRSpacesH := ceil((H_EtTop - H_PlantFreeboard/2 + 2*D_Rebar)/B_EtRebar)
# Coagulant Stock Tank Elevation
Z_CoagTank := Z_EtTop + H_CoagTankAboveHeadTank + H_DoserAssembly - B_StockOutlet
Z_CoagTankOutlet := Z_CoagTank + B_StockOutlet
# Drain Pipes (grit only)
Q_EtDCMax := max(Q_Plant, Q_pipeminor(innerdiameter(ND_EtDrain, PS_Default), H_Et, K_PipeEnt + K_PipeExit))
L_EtDC := L_Et - 2*(S_Fitting + ConRadius(ND_RMPipe))
W_EtDCOLD := max(2*ConRadius(ND_RMPipe), W_Et - max(OuterDiameterFittingPVC(ND_RMPipe) + 2*S_Fitting + T_PlantWall, S_Fitting + ConRadius(ND_EtOverflowDrain) + ElbowRadius(ND_EtOverflowDrain) + SocketDepth(ND_EtOverflowDrain)))
W_EtDC := max(3*S_Fitting + 2*ConRadius(ND_EtDrain) + 2*ConRadius(ND_EtOverflowDrain), 2*ConRadius(ND_RMPipe))
H_EtDCMinFittingsOLD := max(OuterDiameterFittingPVC(ND_EtOverflowDrain), OuterDiameterFittingPVC(ND_EtFlowControl))
H_EtDCMinFittings := OuterDiameterFittingPVC(ND_EtFlowControl)
H_EtDCMinCapacity := H_HorizChannelMin(Q_EtDCMax, W_EtDC, L_EtDC, Nu_Water, E_Concrete, 1)
H_EtDC :=
    max(H_EtDCMinCapacity, H_EtDCMinFittings, 2*ConRadius(ND_RMPipe)) if Z_FlocTank + 2*S_Fitting + OuterDiameterFittingPVC(ND_RMPipe) ≤ Z_Et - T_PlantWall - max(H_EtDCMinCapacity, H_EtDCMinFittings, 2*ConRadius(ND_RMPipe)) - T_ChannelWall
    (Z_Et - Z_FlocTank - T_PlantWall) otherwise
# estimate 1/3 of back slope does not overlap with side slopes
# Other Parameters
Ti_Et0 := (W_Et*L_Et*HW_Et - ((N_EtFullHopper + 1)*0.5*H_EtHopper*W_Et*(L_EtHopper/2 - S_Fitting - ConRadius(ND_EtDrain)) - 1/3*H_EtHopperBack*L_Et*(W_Et - 2*(S_Fitting + ConRadius(ND_EtDrain)))))/Q_Plant
Ti_Et1 := HW_Et*L_Et*W_Et/Q_Plant
Ti_Et :=
    Ti_Et0 if EN_EtGrit == 0
    Ti_Et1 otherwise
.
