Q_Plant := 35*L/s
# [reference: ExpertInputs.xmcd]
# [reference: MathFunctions.xmcd]
# [reference: PipeDatabase.xmcd]
# [reference: MaterialsDatabase.xmcd]
# [reference: FluidsFunctions.xmcd]
# [reference: SedTankFunctions.xmcd]
# [reference: CdcFunctions.xmcd]
# [reference: LfomFunctions.xmcd]
# [reference: SedimentationTank.xmcd]
# [reference: Flocculator.xmcd]
# [reference: LFOM.xmcd]
# Entrance Tank
Q_Plant :=
    Q_Plant*2 if EN_DoubleTrain == 1
    Q_Plant otherwise
    = 35 L/s
# Flow Control Drain and Entrance Tank Walkway
# This feature is a pipe with a gate valve draining into the entrance tank drain channel from a pipe out of the entrance tank's first hopper. The purpose is to control the plant flow by wasting a certain amount of the influent. The operator will need to learn empirically how many turns of the valve handle will give the desired flow rates, which he will read off of a scale in the entrance tank.
HW_EtEst := 0.8 m
L_EtFlowControlPipeEst := 2 m
Q_PlantRange := .5*L/s, 1*L/s .. 40*L/s
ND_EtFlowControl := D_pipeschedule(Q_Plant, PS_Default, HW_EtEst, L_EtFlowControlPipeEst, Nu_Water, E_Pvc, K_PipeExit + K_PipeEnt + K_GateValve + 2*K_El90) = 6 in
ND_EtFlowControl(Q_Plant) := D_pipeschedule(Q_PlantRange, PS_Default, HW_EtEst, L_EtFlowControlPipeEst, Nu_Water, E_Pvc, K_PipeExit + K_PipeEnt + K_GateValve + 2*K_El90)
ND_EtFlowControl(Q_Plant) =  # error: These values can not be compared.
ND_EtOverflowDrain := D_PipeChannel(Q_Plant/2, PS_Default) = 8 in
ND_EtInlet := D_pipe(Q_Plant, AvailND, 1 m, 100 m, Nu_Water, E_Concrete, K_PipeEnt + K_PipeExit) = 10 in
ND_EtFlowControl :=
    D_pipeschedule(Q_Plant/2, PS_Default, HW_EtEst, L_EtFlowControlPipeEst, Nu_Water, E_Pvc, K_PipeExit + K_PipeEnt + K_GateValve + 2*K_El90) if EN_TwoInlets == 1
    D_pipeschedule(Q_Plant, PS_Default, HW_EtEst, L_EtFlowControlPipeEst, Nu_Water, E_Pvc, K_PipeExit + K_PipeEnt + K_GateValve + 2*K_El90) otherwise
    = 6 in
# Rapid mix culvert calculations for super high flow
L_RMChannel := W_EtWalkway = 1 m
# Based on the assumption that the LFOM channel will be square.
HL_ChannelMax = 0.05 m
K_RMGate := 1
HW_LfomChannel == H_HorizChannelΠ(Q_Plant, 1, HL_ChannelMax, L_LfomChannel, Nu_Water, E_Concrete, 0)
K_RMChannel := K_90 + 2*K_RmLfom + K_RMGate = 3.4
H_LfomChannel == HW_LfomChannel + HL_Lfom + H_PlantFreeboard
fW_RMChannel(Q_Plant, HL_RMChannel, K_RMChannel) := sqrt(Q_Plant*(K_RMChannel/(HL_RMChannel*2*g))^(1/2))
W_LfomChannel == W_HorizChannelΠ(Q_Plant, 1, HL_ChannelMax, L_LfomChannel, Nu_Water, E_Concrete, 0)
HW_RMChannel == HW_LfomChannel - HL_ChannelMax
W_RMChannelMin := fW_RMChannel(Q_Plant/2, HL_ChannelMax, K_RMChannel) = 0.180513 m
W_RMChannel := max(W_RMChannelMin, W_HumanMin) = 0.45 m
H_RMChannel := W_RMChannel = 0.45 m
Z_RMChannelBottom := Z_Walkway - Z_Walkway = 0 m
Z_LfomChannelBottom := Z_RMChannelBottom = 0 m
W_RMCulvertMax := S_FlocBaffle[0] = 0.305157 m
# Micro Mix Gate
V_RMChannel(Q_Plant) := Q_Plant/W_RMChannel^2
V_RMGate(Q_Plant) := 1/ε_RMGate*V_RMChannel(Q_Plant)
S_RMGate(ED, Q_Plant) := (Pi_JetPlane*V_RMGate(Q_Plant))^3/ED
S_RMGateMax := S_RMGate(E_MaxRM, Q_Plant/2) = 0.00588134 cm
N_SpacesRMGate := ceil(W_RMChannel*ε_RMGate/S_RMGateMax) = 3826
N_PipesRMGate := N_SpacesRMGate - 1 = 3825
# Based on McMaster Carr availability. Need to use aluminum rods if diameter calculated is less than 0.5 in. Lowest available PVC is 0.5in
OD_AlumRodsAvail := [.25; 3/8; .5; .75]*in
# PVC Pipes will never be able to be used. The outer diameter of a 0.5 in pipe is 0.84 in which is never reached (i.e. 1000 L/s = 0.5in OD). Aluminum rods will always need to be used
D_PipesRMGate := W_RMChannel*ε_RMGate/N_PipesRMGate = 0.00588235 cm
OD_RMRod := FloorNearest(D_PipesRMGate, OD_AlumRodsAvail) = 0.00231589 in
N_RMRods := ceil(W_RMChannel*ε_RMGate/OD_RMRod) = 3825
N_RMPipeSpaces := N_RMRods + 1 = 3826
S_RMGate := (W_RMChannel - OD_RMRod*N_RMRods)/N_RMPipeSpaces = 0.00588082 cm  # This number should be less than S.RMGateMax
S_RMGateMax = 0.00588134 cm
HL_RMChannel := h_lrect(Q_Plant/2, W_RMChannel, H_RMChannel, L_RMChannel, K_90, Nu_Water, E_Concrete, 0) = 0.017951 cm
HL_RMGate := (V_RMChannel(Q_Plant/2)/ε_RMGate)^2/(2*g) = 0.152312 cm
HL_RapidMix := HL_RMChannel + HL_RMGate = 0.170263 cm
# LFOM channel calculations for high flow
L_LfomChannelOrifices := (D_LfomOrifices + S_LfomOrificesMin)*(N_LfomOrifices[0] + 1) + 2*T_ConcreteMin = 0.74285 m
L_LfomChannelHopper := □  # error: This placeholder is empty.
L_LfomChannel := max(L_LfomChannelOrifices)
D_LfomChannelOrifice := D_PipeED(E_MaxRM, Q_Plant/2, Pi_VenaContractaOrifice, Pi_JetRound) = 0.166633 m
# A orifice will be added in the channel before the 90 degree bend to ensure macromixing occurs. This will be a orifice in a ferrocement/concrete sheet.
# Should the ED be the same as the micro mix gate?
HL_LfomChannelOrifice := h_orifice(D_LfomChannelOrifice, Pi_VenaContractaOrifice, Q_Plant/2) = 0.0827213 m
ZW_LfomChannel := HW_Sed + HL_Floc + HL_RapidMix + HL_LfomChannelOrifice = 2.06836 m
Z_LfomChannelBottom := Z_RMChannelBottom = 0 m
HW_LfomChannel := ZW_LfomChannel - Z_LfomChannelBottom = 2.06836 m
W_LfomChannel := W_HumanMin = 0.45 m
H_LfomChannel := HW_LfomChannel + H_Freefall20 + HL_Lfom + H_PlantFreeboard = 2.56836 m
Z_LfomChannelOrifice := HW_LfomChannel - HL_LfomChannelOrifice = 1.98564 m
HL_LfomChannel := h_frect(Q_Plant/2, W_LfomChannel, HW_LfomChannel, L_LfomChannel, Nu_Water, E_Concrete, 1) = 5.32767e-7 m
# Length, Width, and Hopper Calculations (grit =0)
W_EtDCMinRMFit := max(W_EtDCMin, 2*ConRadius(ND_RMPipe)) = 0.352425 m
W_EtFloatDrainLFOM := 2*ConRadius(ND_EtFloat) + S_EtFloat + 2*ConRadius(ND_RMPipe) + 2*S_Fitting + 2*ConRadius(ND_EtDrain) + L_EtSupport
W_EtFloatDrainLFOM = 1.29056 m
W_EtSupportDrainChannel := 2*(L_EtSupport + T_ChannelWall - T_PlantWall) + 3*S_Fitting + 2*ConRadius(ND_EtDrain) + 2*ConRadius(ND_EtOverflowDrain)
W_EtSupportDrainChannel = 1.28814 m
W_EtFirstHopperTwoInlet := 4*(S_Fitting + ConRadius(ND_EtDrain)) + T_EtRemovableWall + 2*T_EtRemovableWallSupport + 2*L_EtSupport
W_EtFirstHopperTwoInlet = 1.3532 m
# Note this Width needs a lot of figuring to calculate the witdth the slopes will take up
W_EtDCLFOM := W_EtDCMinRMFit + T_PlantWall + S_Fitting + OuterDiameterFittingPVC(ND_RMPipe) + S_Fitting = 0.95485 m
W_EtDCOverflow := W_EtDCMinRMFit + SocketDepth(ND_EtOverflowDrain) + ElbowRadius(ND_EtOverflowDrain) + ConRadius(ND_EtOverflowDrain) + S_Fitting = 0.889494 m
W_EtDCOverflow = 0.889494 m
W_EtFloatChannel := 2*ConRadius(ND_EtFloat) + 2*S_EtFloat + W_LfomChannel + T_ChannelWall = 1.03654 m
W_EtFloatChannelDrain := 2*ConRadius(ND_EtFloat) + 2*S_EtFloat + W_LfomChannel + T_ChannelWall + 2*S_Fitting + 2*ConRadius(ND_EtDrain) = 1.23814 m
W_EtFloatChannelDrain = 1.23814 m
EN_LfomPipe = 1
EN_TwoInlets = 0
EN_DoubleTrain = 0
W_EtMin :=
    max(W_HumanMin, W_EtFloatDrainLFOM, W_EtSupportDrainChannel, W_EtDCLFOM, W_EtDCOverflow, W_EtFirstHopperTwoInlet) if EN_TwoInlets == 1
    max(W_HumanMin, W_EtFloatDrainLFOM, W_EtSupportDrainChannel, W_EtDCLFOM, W_EtDCOverflow) if EN_LfomPipe == 1
    max(W_HumanMin, W_EtFloatChannelDrain, W_EtDCOverflow) otherwise
    = 1.29056 m
# Minimum width to satisfy geometric constraints
W_EtMin = 1.29056 m
L_EtMax := fL_Sed(Q_Plant) = 6.89401 m  # maximum length to prevent enlarging the plant footprint
H_EtHopperMin :=
    (35 cm) if Q_Plant ≤ 3*L/s
    (50 cm) otherwise
    = 0.5 m  # so that the hoppers aren't so small that they need to be drained frequently
H_EtHopperMax := HW_EtMax - HL_Flowmeasure = 1.3 m  # so that the entrance tank doesn't get too deep
L_EtHopperMax :=
    min(2*(H_EtHopperMax/tan(AN_EtSlopeMax) + ConRadius(ND_EtDrain) + S_Fitting), (L_EtMax - mod(EN_LfomPipe + 2, 2)*(2*ConRadius(ND_EtDrain) + 2*S_Fitting) - L_LfomChannel*mod(EN_LfomPipe + 1, 2) - 2*T_EtHopperLedge)/2) if EN_LfomPipe == 0
    min(2*(H_EtHopperMax/tan(AN_EtSlopeMax) + ConRadius(ND_EtDrain) + S_Fitting), (L_EtMax - 2*ConRadius(ND_EtDrain) - 2*S_Fitting - 2*T_EtHopperLedge)/2) otherwise
    = 2.8016 m
L_EtHopperMax = 2.8016 m
# Even though I included plumbing here, it should never constrain the length
L_EtHopperMin := min(L_EtHopperMax, max(2*(H_EtHopperMin/tan(AN_EtSlopeMax) + S_Fitting + ConRadius(ND_EtDrain)), 2*(OuterDiameterFittingPVC(ND_RMPipe) - ConRadius(ND_EtDrain) + S_Fitting), 2*(S_EtFloat + ConRadius(ND_EtFloat)))) = 1.2016 m
L_EtHopperMin = 1.2016 m
# if the min is larger than the max, we sacrifice capacity, assuming the plumbing is never constraining
# Required length of the *full* hoppers to meet the capture velocity requirement, assuming min width:
L_EtCaptureEffectiveMin :=
    Q_Plant/V_EtUpMin/W_EtMin if Q_Plant/V_EtUpMin/W_EtMin + 2*(L_EtHopperMin/2 + ConRadius(ND_EtDrain) + S_Fitting + T_EtHopperLedge) < L_Sed
    "null" otherwise
    = 3.38999 m
L_EtCaptureEffectiveMin = 3.38999 m
# need to define as null for now because need some equations below to calculate for case when L.Et = L.Sed
# ensures at least 1 full hopper, use max length to minimize #hoppers
N_EtFullHopperHigh :=
    Ceil((L_EtCaptureEffectiveMin + T_EtHopperLedge)/(L_EtHopperMax + T_EtHopperLedge), 1) if L_EtCaptureEffectiveMin ≠ "null" and L_EtCaptureEffectiveMin - (floor((L_EtCaptureEffectiveMin + T_EtHopperLedge)/(L_EtHopperMax + T_EtHopperLedge)) - 1)*T_EtHopperLedge ≤ L_EtCaptureEffectiveMin
    max(floor((L_EtCaptureEffectiveMin + T_EtHopperLedge)/(L_EtHopperMax + T_EtHopperLedge)), 1) if L_EtCaptureEffectiveMin ≠ "null" and L_EtCaptureEffectiveMin - (floor((L_EtCaptureEffectiveMin + T_EtHopperLedge)/(L_EtHopperMax + T_EtHopperLedge)) - 1)*T_EtHopperLedge > L_EtCaptureEffectiveMin
    Ceil((L_EtMax - mod(EN_LfomPipe + 4, 3)*(L_EtHopperMin/2 + ConRadius(ND_EtDrain) + S_Fitting) - (L_LfomChannel + ConRadius(ND_EtDrain) + S_Fitting)*mod(EN_LfomPipe + 1, 2))/(L_EtHopperMax + T_EtHopperLedge), 1) otherwise
N_EtFullHopper :=
    Ceil((L_EtCaptureEffectiveMin + T_EtHopperLedge)/(L_EtHopperMax + T_EtHopperLedge), 1) if L_EtCaptureEffectiveMin ≠ "null"
    Ceil((L_EtMax - 2*(L_EtHopperMin/2 + ConRadius(ND_EtDrain) + S_Fitting))/(L_EtHopperMax + T_EtHopperLedge), 1) otherwise
    = 2
N_EtFullHopper :=
    N_EtFullHopper if EN_LfomPipe == 1
    N_EtFullHopperHigh otherwise
    = 2
L_EtHopper :=
    if EN_LfomPipe == 0
        max(L_EtHopperMin, {
            (L_EtCaptureEffectiveMin - N_EtFullHopper*T_EtHopperLedge)/N_EtFullHopper if L_EtCaptureEffectiveMin ≠ "null"
            (L_EtMax - (2*ConRadius(ND_EtDrain) + 2*S_Fitting) - T_EtHopperLedge*(N_EtFullHopper + 1) - L_LfomChannel*mod(EN_LfomPipe + 1, 2))/(N_EtFullHopper + 1) otherwise
        })
    otherwise
        max(L_EtHopperMin, {
            (L_EtCaptureEffectiveMin - N_EtFullHopper*T_EtHopperLedge)/N_EtFullHopper if L_EtCaptureEffectiveMin ≠ "null"
            (L_EtMax - 2*ConRadius(ND_EtDrain) - 2*S_Fitting - T_EtHopperLedge*(N_EtFullHopper + 1))/(N_EtFullHopper + 1) otherwise
        })
    = 1.545 m  # when we go to L.EtHopperMin we sacrifice 45 deg slope
N_EtFullHopper = 2
L_EtHopper = 1.545 m
L_Et0 :=
    fL_Sed(Q_Plant) if L_EtCaptureEffectiveMin == "null"
    N_EtFullHopper*L_EtHopper + (N_EtFullHopper + 1)*T_EtHopperLedge + 2*(L_EtHopper/2 + ConRadius(ND_EtDrain) + S_Fitting) otherwise
    = 5.28659 m
L_Et0 = 5.28659 m
L_EtCaptureEffective :=
    L_EtCaptureEffectiveMin if L_EtCaptureEffectiveMin ≠ "null"
    (L_Et0 - mod(EN_LfomPipe + 4, 3)*(L_EtHopper/2 + ConRadius(ND_EtDrain) + S_Fitting) - (L_LfomChannel + ConRadius(ND_EtDrain) + S_Fitting)) if EN_LfomPipe == 0
    (L_Et0 - L_EtHopper/2 - ConRadius(ND_EtDrain) - S_Fitting) otherwise
    = 3.38999 m
L_EtCaptureEffective = 3.38999 m
H_EtHopper := min((L_EtHopper - 2*(ConRadius(ND_EtDrain) + S_Fitting))/2*tan(AN_EtSlopeMax), H_EtHopperMax) = 0.671699 m
ND_EtDrain = 0.0762 m
L_EtHopper = 1.545 m
AN_EtSlopeMax = 0.785398
H_EtHopperMax = 1.3 m
AN_EtSlope := atan(H_EtHopper/(L_EtHopper/2 - S_Fitting - ConRadius(ND_EtDrain))) = 45 deg
W_EtCapture := Q_Plant/V_EtUpMin/(L_Et0 - 1/2*L_EtHopper - (S_Fitting + ConRadius(ND_EtDrain))) = 0.991323 m
W_Et0 := max(W_EtMin, W_EtCapture) = 1.29056 m
V_EtUp := Q_Plant/(W_Et0*(L_Et0 - 1/2*L_EtHopper - (S_Fitting + ConRadius(ND_EtDrain)))) = 0.00614506 m/s
HW_Et0 := H_EtHopper + HL_Flowmeasure = 0.871699 m
H_EtTop := HL_Flowmeasure + H_PlantFreeboard = 0.3 m
H_Et0 :=
    (HW_Et0 + H_PlantFreeboard + 0.4 m) if Q_Plant ≤ 35*L/s
    (HW_Et0 + H_PlantFreeboard) otherwise
H_Et0 = 1.3717 m
L_EtHopperFront :=
    (W_Et0 - 2*S_Fitting - 2*ConRadius(ND_EtDrain)) if EN_LfomPipe == 0
    (L_EtSupport - (T_PlantWall - T_ChannelWall)) otherwise
    = 0.4 m
L_EtHopperBack :=
    (W_Et0 - 2*S_Fitting - 2*ConRadius(ND_EtDrain)) if EN_LfomPipe == 0
    W_Et0 - 2*S_Fitting - 2*ConRadius(ND_EtDrain) - L_EtHopperFront otherwise
    = 0.688963 m
H_EtHopperBack := min(H_EtHopper, tan(AN_EtSlope)*L_EtHopperBack) = 0.671699 m
H_EtHopperFront := min(H_EtHopper, tan(AN_EtSlope)*L_EtHopperFront) = 0.4 m
AN_EtHopperBackSlope := atan(H_EtHopperBack/L_EtHopperBack) = 44.2731 deg
AN_EtHopperFrontSlope := atan(H_EtHopperFront/L_EtHopperFront) = 45 deg
# Overflow Channel
W_EtOverflowSlot := innerdiameter(ND_EtOverflowDrain, PS_Default)*sin(acos(1 - 2*0.9)) = 12.0716 cm
# This sizes the slot such that only 10% of the vertical dimension of the pipe is cut away.
L_EtChannelPipesMin :=
    (0.5*(L_EtHopper/2 + ConRadius(ND_EtDrain) + S_Fitting) - ShortTeeLength(ND_EtOverflowDrain) - CapThickness(ND_EtOverflowDrain)) if EN_EtGrit == 0
    W_rectweir(Q_Plant, 5 cm)/2 otherwise
    = 0.250118 m
L_EtChannelPipesMin = 0.250118 m
L_EtOverflowWeirMin :=
    (2*(L_EtHopper/2 + ConRadius(ND_EtDrain) + S_Fitting)) if EN_EtGrit == 0
    (2*L_EtChannelPipesMin) otherwise
    = 1.7466 m
L_EtOverflowWeirMin = 1.7466 m
H_EtOverflowCutaway := 0.1*innerdiameter(ND_EtOverflowDrain, PS_Default) = 0.7921 in
H_EtLFOMtoOverflow := 3 cm
# Overflow Channel Two Inlets
W_EtOverflowSlot := innerdiameter(ND_EtOverflowDrain, PS_Default)*sin(acos(1 - 2*0.9)) = 12.0716 cm
# This sizes the slot such that only 10% of the vertical dimension of the pipe is cut away.
L_EtChannelPipesMin := W_rectweir(Q_Plant, 5 cm)/2 = 0.841508 m
L_EtChannelPipesMin :=
    (0.5*(L_EtHopper/2 + ConRadius(ND_EtDrain) + S_Fitting) - ShortTeeLength(ND_EtOverflowDrain) - CapThickness(ND_EtOverflowDrain)) if EN_EtGrit == 0
    W_rectweir(Q_Plant, 5 cm)/2 otherwise
    = 0.250118 m
L_EtChannelPipesMin = 0.250118 m
L_EtChannelPipesMax := 0.5*(L_EtHopper/2 + ConRadius(ND_EtDrain) + S_Fitting) - ShortTeeLength(ND_EtOverflowDrain) - CapThickness(ND_EtOverflowDrain)
L_EtChannelPipesMax = 0.250118 m
L_EtChannelPipes := min(L_EtChannelPipesMin, L_EtChannelPipesMax)
L_EtChannelPipes = 0.250118 m
L_EtOverflowWeirMin :=
    (2*(L_EtHopper/2 + ConRadius(ND_EtDrain) + S_Fitting)) if EN_EtGrit == 0
    (2*L_EtChannelPipesMin) otherwise
    = 1.7466 m
H_EtOverflowCutaway := 0.1*innerdiameter(ND_EtOverflowDrain, PS_Default) = 0.7921 in
H_EtLFOMtoOverflow := 3 cm
# Length, Width, and Height Calculations (no grit =1)
W_Et1 := max(L_EtChannelPipesMin, 2*ConRadius(ND_EtFloat) + S_EtFloat + 2*ConRadius(ND_RMPipe) + 3*S_Fitting) = 0.838962 m
L_EtChannelPipes1 := W_Et1 = 0.838962 m
L_EtOverflowWeir1 := 2*L_EtChannelPipes1 = 1.67792 m
A_EntranceFlow := 1.1*π/4*D_pipe(Q_Plant, AvailND, HL_Flowmeasure + S_Fitting + H_EtLFOMtoOverflow, HL_Flowmeasure + S_Fitting + H_EtLFOMtoOverflow, Nu_Water, E_Concrete, K_PipeEnt)^2
A_EntranceFlow = 0.0200656 m^2
S_EtBaffleBottom := max(10 cm, A_EntranceFlow/W_Et1) = 0.1 m
S_EtBaffle := max(A_EntranceFlow/W_Et1, 2*ConRadius(ND_EtInlet) + 2*S_Fitting) = 0.400038 m
HL_EtBaffle := K_FlocBaffle*(Q_Plant/(S_EtBaffle*W_Et1))^2/(2*g) = 0.00138624 m
L_Et1 := 2*(S_Fitting + ConRadius(ND_RMPipe)) + ElbowRadius(ND_EtOverflowDrain) + SocketDepth(ND_EtOverflowDrain) + ConRadius(ND_EtOverflowDrain) + S_Fitting + T_ConcreteMin + S_EtBaffle = 1.43953 m
L_Et1 = 1.43953 m
HW_Et1 := HL_Flowmeasure + S_Fitting + 2*CapHeight(ND_EtFloat) = 0.57385 m
H_Et1 := HL_EtBaffle + HW_Et1 + H_PlantFreeboard = 0.675236 m
W_Et :=
    W_Et0 if EN_EtGrit == 0
    W_Et1 otherwise
    = 1.29056 m
L_EtOverflowWeir :=
    L_EtOverflowWeirMin if EN_EtGrit == 0
    L_EtOverflowWeir1 otherwise
    = 1.7466 m
H_Et :=
    H_Et0 if EN_EtGrit == 0
    H_Et1 otherwise
    = 1.3717 m
HW_Et :=
    HW_Et0 if EN_EtGrit == 0
    HW_Et1 otherwise
    = 0.871699 m
L_EtChannelPipes :=
    L_EtChannelPipesMin if EN_EtGrit == 0
    L_EtChannelPipes1 otherwise
    = 0.250118 m
L_Et :=
    L_Et0 if EN_EtGrit == 0 and EN_DoubleTrain == 0
    (L_Et0 + W_DCWalkway + 3*T_PlantWall + L_LfomChannel) if EN_EtGrit == 0 and EN_DoubleTrain == 1
    L_Et1 otherwise
    = 5.28659 m
H_EtWaterRise := Headloss_weir(Q_Plant, L_EtOverflowWeir) + H_EtLFOMtoOverflow = 7.87791 cm
# This is a conservative (high) estimate of the amount of freeboard which will be used up by the water level rise if double the plant capacity is flowing into the entrance tank (does not take into account the fraction of the additional flow which will flow through the LFOM due to the higher water level)
# Heights and Elevations
D_RMOrifice := D_PipeED(E_MaxRM, Q_Plant, Pi_VenaContractaOrifice, Pi_JetRound) = 0.224272 m
# estimate the length of RM pipe using:2*HW_EtMax + W_EtWalkway
HL_RMMicroOrifice := h_orifice(D_RMOrifice, Pi_VenaContractaOrifice, Q_Plant) = 10.0838 cm
HL_RMPipe :=
    h_l(Q_Plant, innerdiameter(ND_RMPipe, PS_Default), 2*HW_EtMax + W_EtWalkway, K_El90 + K_PipeExit, Nu_Water, E_Pvc) if Q_Plant > Q_PlantMaxLF
    h_l(Q_Plant, innerdiameter(ND_RMPipe, PS_Default), 2*HW_EtMax + W_EtWalkway, 3*K_El90 + K_PipeExit, Nu_Water, E_Pvc) otherwise
HL_RMPipe = 0.0278844 m
# estimate the length of RM pipe using:2*HW_EtMax + W_EtWalkway
ZW_RMPipe :=
    HW_Sed + HL_Floc + HL_RMPipe + HL_RMMicroOrifice if EN_LfomPipe == 1 and EN_DoubleTrain == 0
    HW_Sed + HL_Floc + HL_RapidMix if EN_DoubleTrain == 1
    HW_Sed + HL_Floc + HL_RapidMix otherwise
    = 2.11266 m
# Elevation of the water inside the rapid mix pipe in the Tee outside the entrance tank
ZW_RM := ZW_RMPipe = 2.11266 m
# elevation of the maximum water level in the entrance tank (relative to plant datum)
# This freefall is a safety factor inside the lfom
ZW_Et :=
    (ZW_RM + H_Freefall + HL_Flowmeasure) if EN_LfomPipe == 1
    ZW_LfomChannel + HL_Lfom + H_Freefall20 + HL_LfomChannel otherwise
    = 2.41266 m
# Elevation of the top of the entrance tank walls (includes freeboard)
Z_EtTop := ZW_Et + H_PlantFreeboard = 2.51266 m
ZW_RM := ZW_RMPipe = 2.11266 m  # This is the elevation of the bottom slab of the entrance tank
Z_Et := ZW_Et - HW_Et = 1.54096 m  # bottom elevation of entrance tank (same as the drain entrance elevation)
Z_EtHopper := Z_Et + H_EtHopper = 2.21266 m  # Top elevation of the first set of hoppers. (The peak of the pyramid)
Z_RmMicroMix := Z_SedWeirExit = 1.70689 m
# This is the maximum elevation of the micromix plate to ensure that it is submerged until the plant flow stops. Since we are putting the plate in the flocculator entrance coupling this should not be an issue.
# Linear case
Z_LfomOrifices := ZW_Et - HL_Flowmeasure + D_LfomOrifices/2 = 2.23489 m
# elevation centers of the bottom orifices of the LFOM. The bottom of the bottom row of orifices is at the zero elevation
# Hopper Drains (grit only)
ND_EtDrain = 3 in
# Currently the drains are always set to 3in nominal diameter, but we are saving these calculations which design the drains more thoroughly.
Q_EtHopper := L_EtHopper*W_Et*H_EtHopper/(2*Ti_EtDrain) = 0.0111609 m^3/s  # estimates the max flow out of each Hopper during cleaning
ND_EtDrainBetter := max(D_pipeschedule(Q_EtHopper, PS_Default, HW_Et, L_Et, Nu_Water, E_Pvc, K_PipeExit + K_PipeEnt), ND_EtDrainMin)
# Although this calculation is approximate it is adequate for designing the drains.
ND_EtDrainBetter = 0.0762 m
# Doser Elevations
ZW_CdcCht := Z_EtTop + H_DoserAssembly = 2.58036 m  # End of doser tube elevation at zero flow. (also fluid level in constant head tank)
Z_CdcFloatValveOrifice := ZW_CdcCht + H_CdcFloatvalve = 2.63036 m
Z_CoagulantOutlet := Z_CdcFloatValveOrifice + H_CoagTankAboveHeadTank = 2.93036 m  # This is the height of the outlet from the stock tanks
Z_CoagulantTankBottom := Z_CoagulantOutlet - B_StockOutlet = 2.83036 m  # This is the height of the coagulant stock tank base
N_TRSpacesV := ceil((W_Et + 4*D_Rebar)/(D_LfomOrifices/sqrt(2) + D_Rebar)) = 31  # number of spaces between rebar spanning the width of the entrance tank
B_EtRebar := (W_Et + 3*D_Rebar)/N_TRSpacesV = 0.0428601 m
# number of spaces between rebar spanning the heigth of the top of the entrance tank
N_TRSpacesH := ceil((H_EtTop - H_PlantFreeboard/2 + 2*D_Rebar)/B_EtRebar) = 7
## Trash Racks
# Coagulant Stock Tank Elevation
Z_CoagTank := Z_EtTop + H_CoagTankAboveHeadTank + H_DoserAssembly - B_StockOutlet
Z_CoagTankOutlet := Z_CoagTank + B_StockOutlet
# Drain Channel (grit only)
Q_EtDCMax := max(Q_Plant, Q_pipeminor(innerdiameter(ND_EtDrain, PS_Default), H_Et, K_PipeEnt + K_PipeExit)*(N_EtFullHopper + 1)) = 66.3358 L/s
L_EtDC := L_Et - 2*(S_Fitting + ConRadius(ND_RMPipe))
W_EtDCOLD := max(2*ConRadius(ND_RMPipe), W_Et - max(OuterDiameterFittingPVC(ND_RMPipe) + 2*S_Fitting + T_PlantWall, S_Fitting + ConRadius(ND_EtOverflowDrain) + ElbowRadius(ND_EtOverflowDrain) + SocketDepth(ND_EtOverflowDrain))) = 0.688138 m
W_EtDC :=
    max(3*S_Fitting + 2*ConRadius(ND_EtDrain) + 2*ConRadius(ND_EtOverflowDrain), 2*ConRadius(ND_RMPipe)) if EN_TwoInlets == 0
    max(4*S_Fitting + 4*ConRadius(ND_EtDrain) + 2*T_EtRemovableWallSupport + T_EtRemovableWall) otherwise
    = 0.488138 m
# Added here conidition for drain channel to accomodate the 2 inlet option width
H_EtDCMinFittingsOLD := max(OuterDiameterFittingPVC(ND_EtOverflowDrain), OuterDiameterFittingPVC(ND_EtFlowControl)) = 0.236537 m
H_EtDCMinFittings := OuterDiameterFittingPVC(ND_EtFlowControl) = 0.18415 m
H_EtDCMinCapacity := H_HorizChannelMin(Q_EtDCMax, W_EtDC, L_EtDC, Nu_Water, E_Concrete, 1) = 0.19429 m
H_EtDC :=
    max(H_EtDCMinCapacity, H_EtDCMinFittings, 2*ConRadius(ND_RMPipe)) if Z_FlocTank + 2*S_Fitting + OuterDiameterFittingPVC(ND_RMPipe) ≤ Z_Et - T_PlantWall - max(H_EtDCMinCapacity, H_EtDCMinFittings, 2*ConRadius(ND_RMPipe)) - T_ChannelWall
    (Z_Et - Z_FlocTank - T_PlantWall) otherwise
    = 0.352425 m
# estimate 1/3 of back slope does not overlap with side slopes
# Other Parameters
Ti_Et0 := (W_Et*L_Et*HW_Et - ((N_EtFullHopper + 1)*0.5*H_EtHopper*W_Et*(L_EtHopper/2 - S_Fitting - ConRadius(ND_EtDrain)) - 1/3*H_EtHopperBack*L_Et*(W_Et - 2*(S_Fitting + ConRadius(ND_EtDrain)))))/Q_Plant
Ti_Et1 := HW_Et*L_Et*W_Et/Q_Plant
Ti_Et :=
    Ti_Et0 if EN_EtGrit == 0
    Ti_Et1 otherwise
.
Q_Plant :=
    Q_Plant/2 if EN_DoubleTrain == 1
    Q_Plant otherwise
    = 35 L/s
