# Note : this file does not have high flow capabilities. mrf222
ND_EtPipeFlowControl := 6 in
ND_EtPipeFlowControlDrain := 4 in
# Entrance Tank
# There is only one entrance tank for double or four train plants. Q.Train is NOT used, instead the full Q.Plant is used.
# Flow Control Drain and Entrance Tank Walkway
# This feature is a pipe with a gate valve draining into the entrance tank drain channel from a pipe out of the entrance tank's first hopper. The purpose is to control the plant flow by wasting a certain amount of the influent. The operator will need to learn empirically how many turns of the valve handle will give the desired flow rates, which he will read off of a scale in the entrance tank.
HW_EtEst := 0.8 m
L_EtFlowControlPipeEst := 2 m
Q_PlantRange := .5*L/s, 1*L/s .. 40*L/s
ND_EtFlowControl := D_pipeschedule(Q_Plant, PS_Default, HW_EtEst, L_EtFlowControlPipeEst, Nu_Water, E_Pvc, K_PipeExit + K_PipeEnt + K_GateValve + 2*K_El90)
ND_EtFlowControl(Q_Plant) := D_pipeschedule(Q_PlantRange, PS_Default, HW_EtEst, L_EtFlowControlPipeEst, Nu_Water, E_Pvc, K_PipeExit + K_PipeEnt + K_GateValve + 2*K_El90)
# In the calculation of ND.EtOverflowDrain, the Q.Plant was divided by 3. In order to reduce the valve diameter, it is now divided by 3. This needs to be justified. Are the grit drain pipe stubs enough?
ND_EtOverflowDrain := D_PipeChannel(Q_Plant/3, PS_Default)
ND_EtInlet := D_pipe(Q_Plant, AvailND, 1 m, 100 m, Nu_Water, E_Concrete, K_PipeEnt + K_PipeExit)
ND_EtFlowControl :=
    D_pipeschedule(Q_Plant/2, PS_Default, HW_EtEst, L_EtFlowControlPipeEst, Nu_Water, E_Pvc, K_PipeExit + K_PipeEnt + K_GateValve + 2*K_El90) if EN_TwoInlets == 1
    D_pipeschedule(Q_Plant, PS_Default, HW_EtEst, L_EtFlowControlPipeEst, Nu_Water, E_Pvc, K_PipeExit + K_PipeEnt + K_GateValve + 2*K_El90) otherwise
# Rapid mix culvert calculations for super high flow
L_RMChannel := W_EtWalkway
# Based on the assumption that the LFOM channel will be square.
HL_ChannelMax =  # error: This variable is undefined.
K_RMGate := 1
HW_LfomChannel == H_HorizChannelΠ(Q_Plant, 1, HL_ChannelMax, L_LfomChannel, Nu_Water, E_Concrete, 0)
K_RMChannel := K_90 + 2*K_RmLfom + K_RMGate
H_LfomChannel == HW_LfomChannel + HL_Lfom + H_PlantFreeboard
fW_RMChannel(Q_Plant, HL_RMChannel, K_RMChannel) := sqrt(Q_Plant*(K_RMChannel/(HL_RMChannel*2*g))^(1/2))
W_LfomChannel == W_HorizChannelΠ(Q_Plant, 1, HL_ChannelMax, L_LfomChannel, Nu_Water, E_Concrete, 0)
HW_RMChannel == HW_LfomChannel - HL_ChannelMax
W_RMChannelMin := fW_RMChannel(Q_Plant/2, HL_ChannelMax, K_RMChannel)
W_RMChannel := max(W_RMChannelMin, W_HumanMin)
H_RMChannel := W_RMChannel
Z_RMChannelBottom := Z_Walkway - Z_Walkway
Z_LfomChannelBottom := Z_RMChannelBottom
W_RMCulvertMax := S_FlocBaffle[0]
# Micro Mix Gate
V_RMChannel(Q_Plant) := Q_Plant/W_RMChannel^2
V_RMGate(Q_Plant) := 1/ε_RMGate*V_RMChannel(Q_Plant)
S_RMGate(ED, Q_Plant) := (Pi_JetPlane*V_RMGate(Q_Plant))^3/ED
S_RMGateMax := S_RMGate(E_MaxRM, Q_Plant/2)
N_SpacesRMGate := ceil(W_RMChannel*ε_RMGate/S_RMGateMax)
N_PipesRMGate := N_SpacesRMGate - 1
# Based on McMaster Carr availability. Need to use aluminum rods if diameter calculated is less than 0.5 in. Lowest available PVC is 0.5in
OD_AlumRodsAvail := [.25; 3/8; .5; .75]*in
# PVC Pipes will never be able to be used. The outer diameter of a 0.5 in pipe is 0.84 in which is never reached (i.e. 1000 L/s = 0.5in OD). Aluminum rods will always need to be used
D_PipesRMGate := W_RMChannel*ε_RMGate/N_PipesRMGate
OD_RMRod := FloorNearest(D_PipesRMGate, OD_AlumRodsAvail)
N_RMRods := ceil(W_RMChannel*ε_RMGate/OD_RMRod)
N_RMPipeSpaces := N_RMRods + 1
S_RMGate := (W_RMChannel - OD_RMRod*N_RMRods)/N_RMPipeSpaces  # This number should be less than S.RMGateMax
S_RMGateMax =  # error
HL_RMChannel := h_lrect(Q_Plant/2, W_RMChannel, H_RMChannel, L_RMChannel, K_90, Nu_Water, E_Concrete, 0)
HL_RMGate := (V_RMChannel(Q_Plant/2)/ε_RMGate)^2/(2*g)
HL_RapidMix := HL_RMChannel + HL_RMGate
# LFOM channel calculations for high flow
N_LfomChannels := 1  # This was added 6/26/14 by mrf222
L_LfomChannelOrifices := (D_LfomOrifices + S_LfomOrificesMin)*(N_LfomOrifices[0] + 1) + 2*T_ConcreteMin
L_LfomChannelHopper := □  # error: This placeholder is empty.
L_LfomChannel := max(L_LfomChannelOrifices)
D_LfomChannelOrifice := D_PipeED(E_MaxRM, Q_Plant/2, Pi_VenaContractaOrifice, Pi_JetRound)
# A orifice will be added in the channel before the 90 degree bend to ensure macromixing occurs. This will be a orifice in a ferrocement/concrete sheet.
# Should the ED be the same as the micro mix gate?
HL_LfomChannelOrifice := h_orifice(D_LfomChannelOrifice, Pi_VenaContractaOrifice, Q_Plant/2)
ZW_LfomChannel := HW_Sed + HL_Floc + HL_RapidMix + HL_LfomChannelOrifice
Z_LfomChannelBottom := Z_RMChannelBottom
HW_LfomChannel := ZW_LfomChannel - Z_LfomChannelBottom
W_LfomChannel := W_HumanMin
H_LfomChannel := HW_LfomChannel + H_Freefall20 + HL_Lfom + H_PlantFreeboard
Z_LfomChannelOrifice := HW_LfomChannel - HL_LfomChannelOrifice
HL_LfomChannel := h_frect(Q_Plant/2, W_LfomChannel, HW_LfomChannel, L_LfomChannel, Nu_Water, E_Concrete, 1)
# Length, Width, and Hopper Calculations (grit =0)
W_EtDCMinRMFit := max(W_EtDCMin, 2*ConRadius(ND_RMPipe))
W_EtFloatDrainLFOM := 2*ConRadius(ND_EtFloat) + S_EtFloat + 2*ConRadius(ND_RMPipe) + 2*S_Fitting + 2*ConRadius(ND_EtDrain) + L_EtSupport
W_EtFloatDrainLFOM =  # error
W_EtSupportDrainChannel := 2*(L_EtSupport + T_ChannelWall - T_PlantWall) + 3*S_Fitting + 2*ConRadius(ND_EtDrain) + 2*ConRadius(ND_EtOverflowDrain)
W_EtSupportDrainChannel =  # error
W_EtFirstHopperTwoInlet := 4*(S_Fitting + ConRadius(ND_EtDrain)) + T_EtRemovableWall + 2*T_EtRemovableWallSupport + 2*L_EtSupport
W_EtFirstHopperTwoInlet =  # error
# Note this Width needs a lot of figuring to calculate the witdth the slopes will take up
W_EtDCLFOM := W_EtDCMinRMFit + T_PlantWall + S_Fitting + OuterDiameterFittingPVC(ND_RMPipe) + S_Fitting
W_EtDCOverflow := W_EtDCMinRMFit + SocketDepth(ND_EtOverflowDrain) + ElbowRadius(ND_EtOverflowDrain) + ConRadius(ND_EtOverflowDrain) + S_Fitting
W_EtDCOverflow =  # error
W_EtFloatChannel := 2*ConRadius(ND_EtFloat) + 2*S_EtFloat + W_LfomChannel + T_ChannelWall
W_EtFloatChannelDrain := 2*ConRadius(ND_EtFloat) + 2*S_EtFloat + W_LfomChannel + T_ChannelWall + 2*S_Fitting + 2*ConRadius(ND_EtDrain)
W_EtFloatChannelDrain =  # error
EN_LfomPipe =  # error
EN_TwoInlets =  # error
EN_DoubleTrain =  # error
W_EtMin :=
    max(W_HumanMin, W_EtFloatDrainLFOM, W_EtSupportDrainChannel, W_EtDCLFOM, W_EtDCOverflow, W_EtFirstHopperTwoInlet) if EN_TwoInlets == 1
    max(W_HumanMin, W_EtFloatDrainLFOM, W_EtSupportDrainChannel, W_EtDCLFOM, W_EtDCOverflow) if EN_LfomPipe == 1
    max(W_HumanMin, W_EtFloatChannelDrain, W_EtDCOverflow) otherwise
# Minimum width to satisfy geometric constraints
W_EtMin =  # error
L_EtMax := fL_Sed(Q_Plant)
# maximum length to prevent enlarging the plant footprint
H_EtHopperMin :=
    (35 cm) if Q_Plant ≤ 3*L/s
    (50 cm) otherwise  # so that the hoppers aren't so small that they need to be drained frequently
H_EtHopperMax := HW_EtMax - HL_Flowmeasure  # so that the entrance tank doesn't get too deep
L_EtHopperMax :=
    min(2*(H_EtHopperMax/tan(AN_EtSlopeMax) + ConRadius(ND_EtDrain) + S_Fitting), (L_EtMax - mod(EN_LfomPipe + 2, 2)*(2*ConRadius(ND_EtDrain) + 2*S_Fitting) - L_LfomChannel*mod(EN_LfomPipe + 1, 2) - 2*T_EtHopperLedge)/2) if EN_LfomPipe == 0
    min(2*(H_EtHopperMax/tan(AN_EtSlopeMax) + ConRadius(ND_EtDrain) + S_Fitting), (L_EtMax - 2*ConRadius(ND_EtDrain) - 2*S_Fitting - 2*T_EtHopperLedge)/2) otherwise
L_EtHopperMax =  # error
# Even though I included plumbing here, it should never constrain the length
L_EtHopperMin := min(L_EtHopperMax, max(2*(H_EtHopperMin/tan(AN_EtSlopeMax) + S_Fitting + ConRadius(ND_EtDrain)), 2*(OuterDiameterFittingPVC(ND_RMPipe) - ConRadius(ND_EtDrain) + S_Fitting), 2*(S_EtFloat + ConRadius(ND_EtFloat))))
L_EtHopperMin =  # error
# if the min is larger than the max, we sacrifice capacity, assuming the plumbing is never constraining
# Required length of the *full* hoppers to meet the capture velocity requirement, assuming min width:
L_EtCaptureEffectiveMin :=
    Q_Plant/V_EtUpMin/W_EtMin if Q_Plant/V_EtUpMin/W_EtMin + 2*(L_EtHopperMin/2 + ConRadius(ND_EtDrain) + S_Fitting + T_EtHopperLedge) < L_Sed
    "null" otherwise
L_EtCaptureEffectiveMin =  # error
# need to define as null for now because need some equations below to calculate for case when L.Et = L.Sed
# ensures at least 1 full hopper, use max length to minimize #hoppers
N_EtFullHopperHigh :=
    Ceil((L_EtCaptureEffectiveMin + T_EtHopperLedge)/(L_EtHopperMax + T_EtHopperLedge), 1) if L_EtCaptureEffectiveMin ≠ "null" and L_EtCaptureEffectiveMin - (floor((L_EtCaptureEffectiveMin + T_EtHopperLedge)/(L_EtHopperMax + T_EtHopperLedge)) - 1)*T_EtHopperLedge ≤ L_EtCaptureEffectiveMin
    max(floor((L_EtCaptureEffectiveMin + T_EtHopperLedge)/(L_EtHopperMax + T_EtHopperLedge)), 1) if L_EtCaptureEffectiveMin ≠ "null" and L_EtCaptureEffectiveMin - (floor((L_EtCaptureEffectiveMin + T_EtHopperLedge)/(L_EtHopperMax + T_EtHopperLedge)) - 1)*T_EtHopperLedge > L_EtCaptureEffectiveMin
    Ceil((L_EtMax - mod(EN_LfomPipe + 4, 3)*(L_EtHopperMin/2 + ConRadius(ND_EtDrain) + S_Fitting) - (L_LfomChannel + ConRadius(ND_EtDrain) + S_Fitting)*mod(EN_LfomPipe + 1, 2))/(L_EtHopperMax + T_EtHopperLedge), 1) otherwise
N_EtFullHopper :=
    Ceil((L_EtCaptureEffectiveMin + T_EtHopperLedge)/(L_EtHopperMax + T_EtHopperLedge), 1) if L_EtCaptureEffectiveMin ≠ "null"
    Ceil((L_EtMax - 2*(L_EtHopperMin/2 + ConRadius(ND_EtDrain) + S_Fitting))/(L_EtHopperMax + T_EtHopperLedge), 1) otherwise
N_EtFullHopper :=
    N_EtFullHopper if EN_LfomPipe == 1
    N_EtFullHopperHigh otherwise
L_EtHopper :=
    if EN_LfomPipe == 0
        max(L_EtHopperMin, {
            (L_EtCaptureEffectiveMin - N_EtFullHopper*T_EtHopperLedge)/N_EtFullHopper if L_EtCaptureEffectiveMin ≠ "null"
            (L_EtMax - (2*ConRadius(ND_EtDrain) + 2*S_Fitting) - T_EtHopperLedge*(N_EtFullHopper + 1) - L_LfomChannel*mod(EN_LfomPipe + 1, 2))/(N_EtFullHopper + 1) otherwise
        })
    otherwise
        max(L_EtHopperMin, {
            (L_EtCaptureEffectiveMin - N_EtFullHopper*T_EtHopperLedge)/N_EtFullHopper if L_EtCaptureEffectiveMin ≠ "null"
            (L_EtMax - 2*ConRadius(ND_EtDrain) - 2*S_Fitting - T_EtHopperLedge*(N_EtFullHopper + 1))/(N_EtFullHopper + 1) otherwise
        })  # when we go to L.EtHopperMin we sacrifice 45 deg slope
N_EtFullHopper =  # error
L_EtHopper =  # error
L_Et0 :=
    fL_Sed(Q_Plant) if L_EtCaptureEffectiveMin == "null"
    N_EtFullHopper*L_EtHopper + (N_EtFullHopper + 1)*T_EtHopperLedge + 2*(L_EtHopper/2 + ConRadius(ND_EtDrain) + S_Fitting) otherwise
L_Et0 =  # error
L_EtCaptureEffective :=
    L_EtCaptureEffectiveMin if L_EtCaptureEffectiveMin ≠ "null"
    (L_Et0 - mod(EN_LfomPipe + 4, 3)*(L_EtHopper/2 + ConRadius(ND_EtDrain) + S_Fitting) - (L_LfomChannel + ConRadius(ND_EtDrain) + S_Fitting)) if EN_LfomPipe == 0
    (L_Et0 - L_EtHopper/2 - ConRadius(ND_EtDrain) - S_Fitting) otherwise
L_EtCaptureEffective =  # error
H_EtHopper := min((L_EtHopper - 2*(ConRadius(ND_EtDrain) + S_Fitting))/2*tan(AN_EtSlopeMax), H_EtHopperMax)
ND_EtDrain =  # error
L_EtHopper =  # error
AN_EtSlopeMax =  # error
H_EtHopperMax =  # error
AN_EtSlope := atan(H_EtHopper/(L_EtHopper/2 - S_Fitting - ConRadius(ND_EtDrain)))
W_EtCapture := Q_Plant/V_EtUpMin/(L_Et0 - 1/2*L_EtHopper - (S_Fitting + ConRadius(ND_EtDrain)))
W_Et0 := max(W_EtMin, W_EtCapture)
V_EtUp := Q_Plant/(W_Et0*(L_Et0 - 1/2*L_EtHopper - (S_Fitting + ConRadius(ND_EtDrain))))  # Here is the .4 meters!
L_EtSupport =  # error
HW_Et0 := H_EtHopper + HL_Flowmeasure
# What does this mean?
T_PlantWall =  # error
H_EtTop := HL_Flowmeasure + H_PlantFreeboard
EN_LfomPipe =  # error
H_Et0 := HW_Et0 + H_PlantFreeboard
T_ChannelWall =  # error
W_Et0 =  # error
W_EtCapture =  # error
# 6/26/14 mrf222:
# The Length of the front hopper should not be more than the 40 cm required for the support of the entrance tank because an operator needs to be able to reach over the plant wall and grab the pipe stub. If the height of the sed tank becomes too tall that this 40 cm constraint would cause an angle that prevents grit settling, then there will need to be two trains of flow through the entrance tank with mirrored hoppers.
# In summary, constrain the front hopper to 40 cm and make the back hopper length dependant on that.
L_EtHopperFront := L_EtSupport - (T_PlantWall - T_ChannelWall)
L_EtHopperBack := W_Et0 - L_EtHopperFront - 2*S_Fitting - 2*ConRadius(ND_EtDrain)
H_EtHopperBack := min(H_EtHopper, tan(AN_EtSlope)*L_EtHopperBack)
H_EtHopperFront := min(H_EtHopper, tan(AN_EtSlope)*L_EtHopperFront)
AN_EtHopperBackSlope := atan(H_EtHopperBack/L_EtHopperBack)
AN_EtHopperFrontSlope := atan(H_EtHopperFront/L_EtHopperFront)
# Low Flow Design
W_EtDCFloat := max(2*S_Fitting + 2*(ConRadius(ND_EtDrain) + ConRadius(ND_RMPipe)), L_CdcLever - T_PlantWall + ConRadius(ND_EtFloat) + S_Fitting/5)
W_EtLfomFloat := 2*ConRadius(ND_EtFloat) + S_EtFloat + 2*ConRadius(ND_RMPipe) + 2*S_Fitting + 2*ConRadius(ND_EtDrain)
L_EtCaptureEffectiveMinLF(W_Et) := Q_Plant/V_EtUpMin/W_Et  # Length needed for grit removal
L_EtHopperLfomMin := (2*ConRadius(ND_EtFloat) + S_EtFloat) + 2*ConRadius(ND_EtDrain) + 2*S_Fitting
L_EtHopperInletMin(W_Et, L_EtHopperLfom) :=
    L_EtMax - L_EtHopperLfom - T_EtHopperLedge if (L_EtHopperLfom - S_Fitting - 2*ConRadius(ND_RMPipe)) ≥ L_EtCaptureEffectiveMinLF(W_Et) and L_EtHopperLfom > (L_EtMax - T_EtHopperLedge)/2
    (L_EtMax - T_EtHopperLedge)/2 if (L_EtHopperLfom - S_Fitting - 2*ConRadius(ND_RMPipe)) ≥ L_EtCaptureEffectiveMinLF(W_Et) and L_EtHopperLfom ≤ (L_EtMax - T_EtHopperLedge)/2
    L_EtCaptureEffectiveMinLF(W_Et) - (L_EtHopperLfom - S_Fitting - 2*ConRadius(ND_RMPipe)) + 2*S_Fitting + 2*ConRadius(ND_EtInlet) otherwise
L_EtEst := L_EtHopperLfomMin + L_EtHopperInletMin(W_EtDCFloat, L_EtHopperLfomMin) + T_EtHopperLedge
L_EtHopperIn :=
    (L_EtHopperInletMin(W_EtDCFloat, L_EtHopperLfomMin) + L_EtHopperLfomMin)/2 if (L_EtHopperInletMin(W_EtDCFloat, L_EtHopperLfomMin) + L_EtHopperLfomMin)/2 ≥ L_EtHopperLfomMin
    L_EtHopperInletMin(W_EtDCFloat, L_EtHopperLfomMin) otherwise
L_EtHopperOut :=
    (L_EtHopperInletMin(W_EtDCFloat, L_EtHopperLfomMin) + L_EtHopperLfomMin)/2 if (L_EtHopperInletMin(W_EtDCFloat, L_EtHopperLfomMin) + L_EtHopperLfomMin)/2 ≥ L_EtHopperLfomMin
    L_EtHopperLfomMin otherwise
W_EtLF := W_EtDCFloat
L_EtLF := L_EtHopperIn + L_EtHopperOut + T_EtHopperLedge
H_EtHopperLF := max(max(L_EtHopperIn, L_EtHopperOut)*tan(40 deg))
AN_EtSlopeIn := atan(H_EtHopper/(L_EtHopperIn - S_Fitting - 2*ConRadius(ND_EtDrain)))
AN_EtSlopeOut := atan(H_EtHopper/(L_EtHopperOut - S_Fitting - 2*ConRadius(ND_EtDrain)))
HW_EtLF := H_EtHopper + HL_Flowmeasure
H_EtLF := HW_EtLF + H_PlantFreeboard
L_EtHopperFrontIn := L_EtHopperIn - 2*S_Fitting - 2*ConRadius(ND_RMPipe)
L_EtHopperFrontOut := L_EtHopperOut - 2*S_Fitting - 2*ConRadius(ND_RMPipe)
H_EtHopperFrontIn := min(H_EtHopper, tan(AN_EtSlopeIn)*L_EtHopperFrontIn)
H_EtHopperFrontOut := min(H_EtHopper, tan(AN_EtSlopeOut)*L_EtHopperFrontIn)
L_EtHopperBackLF := W_EtLF - 2*S_Fitting - 2*ConRadius(ND_EtDrain)
H_EtHopperBackLF := min(H_EtHopper, tan(60 deg)*L_EtHopperBack)
H_EtHopperBack :=
    H_EtHopperBackLF if Q_Plant ≤ Q_PlantMaxLF
    H_EtHopperBack otherwise
L_EtHopperBack :=
    L_EtHopperBackLF if Q_Plant ≤ Q_PlantMaxLF
    L_EtHopperBack otherwise
AN_EtHopperBackSlope := atan(H_EtHopperBack/L_EtHopperBack)
AN_EtHopperFrontSlopeIn := atan(H_EtHopperFrontIn/L_EtHopperFrontIn)
AN_EtHopperFrontSlopeOut := atan(H_EtHopperFrontOut/L_EtHopperFrontOut)
# Overflow Channel
W_EtOverflowSlot := innerdiameter(ND_EtOverflowDrain, PS_Default)*sin(acos(1 - 2*0.9))
# This sizes the slot such that only 10% of the vertical dimension of the pipe is cut away.
L_EtChannelPipesMin :=
    (0.5*(L_EtHopper/2 + ConRadius(ND_EtDrain) + S_Fitting) - ShortTeeLength(ND_EtOverflowDrain) - CapThickness(ND_EtOverflowDrain)) if EN_EtGrit == 0
    W_rectweir(Q_Plant, 5 cm)/2 otherwise
L_EtChannelPipesMin =  # error
L_EtOverflowWeirMin :=
    (2*(L_EtHopper/2 + ConRadius(ND_EtDrain) + S_Fitting)) if EN_EtGrit == 0
    (2*L_EtChannelPipesMin) otherwise
L_EtOverflowWeirMin =  # error
L_Et := □  # error: This placeholder is empty.
H_EtOverflowCutaway := 0.1*innerdiameter(ND_EtOverflowDrain, PS_Default)
H_EtLFOMtoOverflow := 3 cm
# Overflow Channel Two Inlets
W_EtOverflowSlot := innerdiameter(ND_EtOverflowDrain, PS_Default)*sin(acos(1 - 2*0.9))
# This sizes the slot such that only 10% of the vertical dimension of the pipe is cut away.
L_EtChannelPipesMin := W_rectweir(Q_Plant, 5 cm)/2
L_EtChannelPipesMin :=
    (0.5*(L_EtHopper/2 + ConRadius(ND_EtDrain) + S_Fitting) - ShortTeeLength(ND_EtOverflowDrain) - CapThickness(ND_EtOverflowDrain)) if EN_EtGrit == 0
    W_rectweir(Q_Plant, 5 cm)/2 otherwise
L_EtChannelPipesMin =  # error
L_EtChannelPipesMax := 0.5*(L_EtHopper/2 + ConRadius(ND_EtDrain) + S_Fitting) - ShortTeeLength(ND_EtOverflowDrain) - CapThickness(ND_EtOverflowDrain)
L_EtChannelPipesMax =  # error
L_EtChannelPipes := min(L_EtChannelPipesMin, L_EtChannelPipesMax)
L_EtChannelPipes =  # error
L_EtOverflowWeirMin :=
    (2*(L_EtHopper/2 + ConRadius(ND_EtDrain) + S_Fitting)) if EN_EtGrit == 0
    (2*L_EtChannelPipesMin) otherwise
H_EtOverflowCutaway := 0.1*innerdiameter(ND_EtOverflowDrain, PS_Default)
H_EtLFOMtoOverflow := 3 cm
# This is no grit. Not super important now.
# Length, Width, and Height Calculations (no grit =1)
W_Et1 := max(L_EtChannelPipesMin, 2*ConRadius(ND_EtFloat) + S_EtFloat + 2*ConRadius(ND_RMPipe) + 3*S_Fitting)
L_EtChannelPipes1 := W_Et1
L_EtOverflowWeir1 := 2*L_EtChannelPipes1
A_EntranceFlow := 1.1*π/4*D_pipe(Q_Plant, AvailND, HL_Flowmeasure + S_Fitting + H_EtLFOMtoOverflow, HL_Flowmeasure + S_Fitting + H_EtLFOMtoOverflow, Nu_Water, E_Concrete, K_PipeEnt)^2
A_EntranceFlow =  # error
S_EtBaffleBottom := max(10 cm, A_EntranceFlow/W_Et1)
S_EtBaffle := max(A_EntranceFlow/W_Et1, 2*ConRadius(ND_EtInlet) + 2*S_Fitting)
HL_EtBaffle := K_FlocBaffle*(Q_Plant/(S_EtBaffle*W_Et1))^2/(2*g)
L_Et1 := 2*(S_Fitting + ConRadius(ND_RMPipe)) + ElbowRadius(ND_EtOverflowDrain) + SocketDepth(ND_EtOverflowDrain) + ConRadius(ND_EtOverflowDrain) + S_Fitting + T_ConcreteMin + S_EtBaffle
L_Et1 =  # error
HW_Et1 := HL_Flowmeasure + S_Fitting + 2*CapHeight(ND_EtFloat)
H_Et1 := HL_EtBaffle + HW_Et1 + H_PlantFreeboard
W_Et :=
    W_Et0 if EN_EtGrit == 0 and Q_Plant > Q_PlantMaxLF
    W_EtLF if Q_Plant ≤ Q_PlantMaxLF
    W_Et1 otherwise
L_EtOverflowWeir :=
    L_EtOverflowWeirMin if EN_EtGrit == 0
    L_EtOverflowWeir1 otherwise
H_Et :=
    H_Et0 if EN_EtGrit == 0 and Q_Plant > Q_PlantMaxLF
    H_EtLF if Q_Plant ≤ Q_PlantMaxLF
    H_Et1 otherwise
L_Et :=
    L_Et0 if EN_EtGrit == 0 and EN_DoubleTrain == 0 and Q_Plant > Q_PlantMaxLF
    (L_Et0 + W_DCWalkway + 3*T_PlantWall + L_LfomChannel) if EN_EtGrit == 0 and EN_DoubleTrain == 1 and Q_Plant > Q_PlantMaxLF
    L_EtLF if Q_Plant ≤ Q_PlantMaxLF
    L_Et1 otherwise
HW_Et :=
    HW_Et0 if EN_EtGrit == 0 and Q_Plant > Q_PlantMaxLF
    HW_EtLF if Q_Plant ≤ Q_PlantMaxLF
    HW_Et1 otherwise
L_EtChannelPipes :=
    L_EtChannelPipesMin if EN_EtGrit == 0
    L_EtChannelPipes1 otherwise
# This is a conservative (high) estimate of the amount of freeboard which will be used up by the water level rise if double the plant capacity is flowing into the entrance tank (does not take into account the fraction of the additional flow which will flow through the LFOM due to the higher water level)
H_EtWaterRise := Headloss_weir(Q_Plant, L_EtOverflowWeir) + H_EtLFOMtoOverflow
# Heights and Elevations
D_RMOrifice := D_PipeED(E_MaxRM, Q_Plant, Pi_VenaContractaOrifice, Pi_JetRound)
# estimate the length of RM pipe using:2*HW_EtMax + W_EtWalkway
HL_RMMicroOrifice := h_orifice(D_RMOrifice, Pi_VenaContractaOrifice, Q_Plant)
HL_RMPipe :=
    h_l(Q_Plant, innerdiameter(ND_RMPipe, PS_Default), 2*HW_EtMax + W_EtWalkway, K_El90 + K_PipeExit, Nu_Water, E_Pvc) if Q_Plant > Q_PlantMaxLF
    h_l(Q_Plant, innerdiameter(ND_RMPipe, PS_Default), 2*HW_EtMax + W_EtWalkway, 3*K_El90 + K_PipeExit, Nu_Water, E_Pvc) otherwise
HL_RMPipe =  # error
# estimate the length of RM pipe using:2*HW_EtMax + W_EtWalkway
ZW_RMPipe :=
    HW_Sed + HL_Floc + HL_RMPipe + HL_RMMicroOrifice if EN_LfomPipe == 1 and EN_DoubleTrain == 0
    HW_Sed + HL_Floc + HL_RapidMix if EN_DoubleTrain == 1
    HW_Sed + HL_Floc + HL_RapidMix otherwise
# Elevation of the water inside the rapid mix pipe in the Tee outside the entrance tank
ZW_RM := ZW_RMPipe
# elevation of the maximum water level in the entrance tank (relative to plant datum)
# This freefall is a safety factor inside the lfom
ZW_Et :=
    (ZW_RM + H_Freefall + HL_Flowmeasure) if EN_LfomPipe == 1
    ZW_LfomChannel + HL_Lfom + H_Freefall20 + HL_LfomChannel otherwise
# Elevation of the top of the entrance tank walls (includes freeboard)
Z_EtTop := ZW_Et + H_PlantFreeboard
ZW_RM := ZW_RMPipe  # This is the elevation of the bottom slab of the entrance tank
Z_Et == ZW_Et - HW_Et  # bottom elevation of entrance tank (same as the drain entrance elevation)
Z_EtHighest := ZW_Et - HW_Et  # Changed to be the height of the walkway to make pouring the bottom slab easier (10/4/2014 mrf222)
Z_Et :=
    Z_Walkway if Z_Walkway < Z_EtHighest
    Z_EtHighest otherwise
DropEt := Z_EtHighest - Z_Et
L_EtChannelPipes := L_EtChannelPipes + DropEt
Z_EtHopper := Z_Et + H_EtHopper  # Top elevation of the first set of hoppers. (The peak of the pyramid)
Z_RmMicroMix := Z_SedWeirExit
# This is the maximum elevation of the micromix plate to ensure that it is submerged until the plant flow stops. Since we are putting the plate in the flocculator entrance coupling this should not be an issue.
# Linear case
Z_LfomOrifices := ZW_Et - HL_Flowmeasure + D_LfomOrifices/2
# elevation centers of the bottom orifices of the LFOM. The bottom of the bottom row of orifices is at the zero elevation
# Hopper Drains (grit only)
ND_EtDrain =  # error
# Currently the drains are always set to 3in nominal diameter, but we are saving these calculations which design the drains more thoroughly.
Q_EtHopper := L_EtHopper*W_Et*H_EtHopper/(2*Ti_EtDrain)  # estimates the max flow out of each Hopper during cleaning
# Dropping the Z.Et value will change this flow rate.
ND_EtDrainBetter := max(D_pipeschedule(Q_EtHopper, PS_Default, HW_Et, L_Et, Nu_Water, E_Pvc, K_PipeExit + K_PipeEnt), ND_EtDrainMin)
# Although this calculation is approximate it is adequate for designing the drains.
ND_EtDrainBetter =  # error
# Doser Elevations
ZW_CdcCht == (Z_EtTop + H_DoserAssembly)  # End of doser tube elevation at zero flow. (also fluid level in constant head tank)
ZW_CdcCht := Z_EtTop + H_DoserAssembly
# Update as of October 2014:
# The Dosing for coagulant does not need to happen at the elevation of the top of the lever arm (which is the top of the entrance tank) and can instead occur right above the height of the rapid mix pipe at the bottom of the LFOM. For now, dose the coagulant at the elevation of the walkway.
# went back 10/17/2014
Z_CdcFloatValveOrifice := ZW_CdcCht + H_CdcFloatvalve
Z_CoagulantOutlet := Z_CdcFloatValveOrifice + H_CoagTankAboveHeadTank  # This is the height of the outlet from the stock tanks
Z_CoagulantTankBottom := Z_CoagulantOutlet - B_StockOutlet  # This is the height of the coagulant stock tank base
## Trash Racks
N_TRSpacesV := ceil((W_Et + 4*D_Rebar)/(D_LfomOrifices/sqrt(2) + D_Rebar))  # number of spaces between rebar spanning the width of the entrance tank
B_EtRebar := (W_Et + 3*D_Rebar)/N_TRSpacesV
# number of spaces between rebar spanning the heigth of the top of the entrance tank
N_TRSpacesH := ceil((H_EtTop - H_PlantFreeboard/2 + 2*D_Rebar)/B_EtRebar)
# Coagulant Stock Tank Elevation
Z_CoagTank := Z_EtTop + H_CoagTankAboveHeadTank + H_DoserAssembly - B_StockOutlet
Z_CoagTankOutlet := Z_CoagTank + B_StockOutlet
# Drain Channel (grit only)
Q_EtDCMax :=
    max(Q_Plant, Q_pipeminor(innerdiameter(ND_EtDrain, PS_Default), H_Et, K_PipeEnt + K_PipeExit)*(N_EtFullHopper + 1)) if Q_Plant > Q_PlantMaxLF
    max(Q_Plant, Q_pipeminor(innerdiameter(ND_EtDrain, PS_Default), H_Et, K_PipeEnt + K_PipeExit)) otherwise
L_EtDC := L_Et - 2*(S_Fitting + ConRadius(ND_RMPipe))
W_EtDCOLD := max(2*ConRadius(ND_RMPipe), W_Et - max(OuterDiameterFittingPVC(ND_RMPipe) + 2*S_Fitting + T_PlantWall, S_Fitting + ConRadius(ND_EtOverflowDrain) + ElbowRadius(ND_EtOverflowDrain) + SocketDepth(ND_EtOverflowDrain)))
W_EtDC :=
    max(3*S_Fitting + 2*ConRadius(ND_EtDrain) + 2*ConRadius(ND_EtOverflowDrain), 2*ConRadius(ND_RMPipe)) if EN_TwoInlets == 0
    max(4*S_Fitting + 4*ConRadius(ND_EtDrain) + 2*T_EtRemovableWallSupport + T_EtRemovableWall) otherwise
# Added here conidition for drain channel to accomodate the 2 inlet option width
H_EtDCMinFittingsOLD := max(OuterDiameterFittingPVC(ND_EtOverflowDrain), OuterDiameterFittingPVC(ND_EtFlowControl))
H_EtDCMinFittings := OuterDiameterFittingPVC(ND_EtFlowControl)
H_EtDCMinCapacity := H_HorizChannelMin(Q_EtDCMax, W_EtDC, L_EtDC, Nu_Water, E_Concrete, 1)
H_EtDC :=
    max(H_EtDCMinCapacity, H_EtDCMinFittings, 2*ConRadius(ND_RMPipe)) if Z_FlocTank + 2*S_Fitting + OuterDiameterFittingPVC(ND_RMPipe) ≤ Z_Et - T_PlantWall - max(H_EtDCMinCapacity, H_EtDCMinFittings, 2*ConRadius(ND_RMPipe)) - T_ChannelWall
    (Z_Et - Z_FlocTank - T_PlantWall) otherwise
# Z.Et occurs in this section, too. The drain channel, though, isn't to big of a deal in terms of how the hydraulic components work (hopefully)
# estimate 1/3 of back slope does not overlap with side slopes
# Other Parameters
Ti_Et0 := (W_Et*L_Et*HW_Et - ((N_EtFullHopper + 1)*0.5*H_EtHopper*W_Et*(L_EtHopper/2 - S_Fitting - ConRadius(ND_EtDrain)) - 1/3*H_EtHopperBack*L_Et*(W_Et - 2*(S_Fitting + ConRadius(ND_EtDrain)))))/Q_Plant
Ti_Et1 := HW_Et*L_Et*W_Et/Q_Plant
Ti_Et :=
    Ti_Et0 if EN_EtGrit == 0
    Ti_Et1 otherwise
Q_Plant :=
    Q_Plant/2 if EN_DoubleTrain == 1
    Q_Plant otherwise
# Entrance Pipe Flow Control
SF_4to6 := 1.5  # Safety Factor for pipe length to ensure it is greater than h4to6 that water will rise
h_1to3(Q_Plant, ND_EtPipeFlowControl) := (K_GateValve + K_El90)*8/(g*π^2)*Q_Plant^2/ND_EtPipeFlowControl^4 - 1.5*ND_EtPipeFlowControl
h_1to5(ND_EtPipeFlowControl, ND_EtPipeFlowControlDrain) := H_Et + ElbowRadius(ND_EtPipeFlowControl) + ElbowRadius(ND_EtPipeFlowControlDrain)
# This is the drawing of the points in the previous design.
# The new design has the upper system moved further away from the trashrack
# but the points are the same.
h_1to4(ND_EtPipeFlowControl, ND_EtPipeFlowControlDrain) := 2*SocketDepth(ND_EtPipeFlowControlDrain) + ShortTeeLength(ND_EtPipeFlowControl) + 1/2*TeeLength(ND_EtPipeFlowControlDrain) + ND_EtPipeFlowControlDrain
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L_horizontalPipe4to5(ND_EtPipeFlowControl, ND_EtPipeFlowControlDrain) := 2*SocketDepth(ND_EtPipeFlowControlDrain) + T_PlantWall + S_Fitting + ConRadius(ND_EtPipeFlowControl) - ShortTeeLength(ND_EtPipeFlowControlDrain)
L_1(ND_EtPipeFlowControlDrain) := 2*ElbowRadius(ND_EtPipeFlowControlDrain) + ShortTeeLength(ND_EtPipeFlowControlDrain) + 0.3*L_Et
L_4to5(ND_EtPipeFlowControl, ND_EtPipeFlowControlDrain) := h_1to5(ND_EtPipeFlowControl, ND_EtPipeFlowControlDrain) + h_1to4(ND_EtPipeFlowControl, ND_EtPipeFlowControlDrain) + L_1(ND_EtPipeFlowControlDrain)
ε_pvc := 0.004*10^-3*m  # The roughness of PVC given by AguaClara member
h_f4to5(Q_Plant, ND_EtPipeFlowControlDrain) := h_f(Q_Plant, ND_EtPipeFlowControlDrain, L_4to5(ND_EtPipeFlowControl, ND_EtPipeFlowControlDrain), Nu_Water, ε_pvc)
h_e4to5(Q, ND_EtPipeFlowControlDrain) := h_e(Q, ND_EtPipeFlowControlDrain, 2*K_El90)
h_4to6(Q, ND_EtPipeFlowControl, ND_EtPipeFlowControlDrain) := h_e4to5(Q, ND_EtPipeFlowControlDrain) + h_f4to5(Q, ND_EtPipeFlowControlDrain) - h_1to5(ND_EtPipeFlowControl, ND_EtPipeFlowControlDrain) - h_1to4(ND_EtPipeFlowControl, ND_EtPipeFlowControlDrain)
DecPipe(ND_EtPipeFlowControlDrain) :=
    currentIndex ← index(ND_EtPipeFlowControlDrain, Pipesizes[:, 0])
    return Pipesizes[:, 0][currentIndex - 1]
# DecPipe outputs the next smallest diameter available in the Pipesizes array.
# Precondition: input is not the smallest diameter in the Pipesizes array
NewPVCDiameter(Q_Plant, ND_EtPipeFlowControl) :=
    PVC ← ND_EtPipeFlowControl
    PVC_temp ← DecPipe(PVC)
    h_4to6temp ← h_4to6(Q_Plant, ND_EtPipeFlowControl, PVC_temp)
    while (h_4to6temp < 0.5 m)
        PVC ← PVC_temp
        PVC_temp ← DecPipe(PVC_temp)
        h_4to6temp ← h_4to6(Q_Plant, ND_EtPipeFlowControl, PVC_temp)
    return PVC
# This piece of code rounds the output of NewPVCDiameter to avoid erros that result from decimals in the drawing script
ND_EtPipeFlowControlDrainRound := round(NewPVCDiameter(Q_Plant, ND_EtPipeFlowControl)/m*1000)*m/1000
