Q_Plant := 20*L/s
method := "EtFlocSedFi"
Mod := 0
# Master Expert Inputs | Officially Approved List Handed Over on April 23rd, 2014
# [reference: ErrorChecking_ApprovedExpertInputs.xmcd]
# Math Functions
index(s, array) :=
    i ← 0
    while s > 1.0005*array[i] and i < last(array)
        i ← i + 1
    return i
FloorNearest(number, array) :=
    x ← number if number ≤ array[0]
    x ← array[last(array)] if number ≥ array[last(array)]
    otherwise
        i ← 0
        while (number > array[i] and i < last(array))
            i ← i + 1
        x ← array[i - 1]
    return x
RoundNearest(number, array) :=
    x ← array[0] if number ≤ array[0] or number ≥ array[last(array)]
    x ← array[last(array)] if number ≥ array[last(array)]
    otherwise
        i ← 0
        while (number > array[i] and i < last(array))
            i ← i + 1
        x ← array[i] if (number - array[i - 1]) > (array[i] - number)
        x ← array[i - 1] otherwise
    return x
CeilNearest(number, array) :=
    x ← array[0] if number ≤ array[0]
    x ← array[last(array)] if number ≥ array[last(array)]
    otherwise
        i ← 0
        while (number > array[i] and i < last(array))
            i ← i + 1
        x ← array[i]
    return x
# These "nearest" functions will return "number" for the case when the number is less than the smallest value in the array or greater than the largest value in the array
LookupCeil(search, arrayin, arrayout) :=
    i ← 0
    while (search > arrayin[i] and i < last(arrayin))
        i ← i + 1
    return arrayout[i]
# Returns value in second array corresponding to index in first array that is greater than the search value
ramp(start, interval, range) :=
    for i ∈ 0 .. range/interval - 1
        ramp[i] ← start + i*interval
    return ramp
Absolute(value) :=
    value if value ≥ 0
    (-value) otherwise
# This function was added to obtain the magnitude of the numerical value. This was required for considering the actual depth of units below the plant origin.
# Revision 6010, imported on February 28th, 2014
# Pipe Functions | Revision 6010, imported on February 28th, 2014
# Pipe Specification  Corresponding Index (EN.PipeSpec)  Used for
# Schedule 10 (thin wall)  0
# Schedule 30  1
# Schedule 40  2  (PS.FiBranch)  FiBranch (slotted pipes) (1” and 1.5”)
# Schedule 80  3
# Schedule 120  4
# Schedule 160 (thick wall)  5
# SDR 17 (thick wall)  6 (PS.Modules)*  1/2” and ¾” pipes used for building modules
# SDR 21  7
# SDR 26  8 (PS.Default) Is there a better name?  all pipes larger than ¾” except FiBranch
# SDR 32.5  9
# SDR 41 (thin wall)  10
PS_FiBranch := 2
PS_Modules := 6
PS_Default := 8
# [component: outputs EN_PipeSpecDescription]
# Some of the inner diameters of the pipes are not the same as produced by the script function above, especially for the smaller pipes because making a wall that thin is not practical. Later perhaps we could include a check, that if the wall thickness based on the Avg Inner D. here is greater than one used we can use this ID. Do not have data for all choices.
CountryPipes := [
    1, 0;
    1, 0;
    1, 0;
    1, 1;
    1, 1;
    1, 1;
    0, 0;
    1, 1;
    1, 1;
    0, 0;
    1, 1;
    0, 0;
    1, 1;
    0, 0;
    1, 1;
    1, 1;
    1, 0;
    1, 1;
    0, 0;
    1, 0;
    0, 1;
    0, 0;
    1, 1;
    1, 1
]
Pipesizes := [
    1/8*in, .405 in;
    1/4*in, .540 in;
    3/8*in, .675 in;
    1/2*in, .840 in;
    3/4*in, 1.050 in;
    1 in, 1.315 in;
    1.25 in, 1.66 in;
    1.5 in, 1.9 in;
    2 in, 2.375 in;
    2.5 in, 2.875 in;
    3 in, 3.5 in;
    3.5 in, 4 in;
    4 in, 4.5 in;
    5 in, 5.563 in;
    6 in, 6.625 in;
    8 in, 8.625 in;
    10 in, 10.75 in;
    12 in, 12.75 in;
    14 in, 14 in;
    15 in, 15 in;
    16 in, 16 in;
    18 in, 18 in;
    20 in, 20 in;
    24 in, 24 in
]
MinWallThickness := [
    .049, .057, .068, .095, 0, 0, 0, 0, 0, 0, 0;
    .065, .073, .088, .119, 0, 0, 0, 0, 0, 0, 0;
    .065, .073, .091, .126, 0, 0, 0, 0, 0, 0, 0;
    .083, .095, .109, .147, .170, .188, 0.675/17, 0, 0, 0, 0;
    .083, .095, .113, .154, .170, .219, 0.072, 0.07, 0, 0, 0;
    .109, .114, .133, .179, .2, .25, 0.087, 0.073, 0.07, 0, 0;
    .109, .117, .14, .191, .215, .25, 0.108, 0.089, 0.074, 0.07, 0;
    .109, .125, .145, .2, .2258, .281, 0.122, 0.100, 0.083, 0.07, 0;
    .109, 0, .154, .218, .25, .344, 0.150, 0.123, 0.101, 0.083, 2.375/41;
    .12, 0, .203, .276, .3, .375, 0.179, 0.147, 0.120, 0.098, 2.875/41;
    .12, 0, .216, .3, .35, .438, 0.219, 0.177, 0.145, 0.118, 0.095;
    0, 0, 0, 0, 0, 0, 0.249, 0.202, 0.164, 0.133, 0.108;
    .12, 0, .237, .337, .437, .531, 0.281, 0.227, 0.183, 0.148, 0.120;
    .134, 0, .258, .375, .5, .625, 0.347, 0.281, 0.228, 0.182, 0.146;
    .134, 0, .28, .432, .562, .719, 0.414, 0.335, 0.271, 0.216, 0.172;
    .148, .277, .322, .5, .718, .906, 0.539, 0.435, 0.352, 0.281, 0.223;
    .165, .307, .365, .5, .843, 1.125, 0.670, 0.542, 0.438, 0.351, 0.278;
    .18, .330, .406, .687, 1, 1.312, 0.795, 0.643, 0.520, 0.416, 0.330;
    .25, .375, .437, .75, 1.093, 1.406, 14/17, 14/21, 0.538, 14/32.5, 14/41;
    0, 0, 0, 0, 0, 0, 15/17, 15/21, 15/26, 15/32.5, 15/41;
    .25, .375, .5, .843, 1.218, 1.593, 16/17, 16/21, 0.615, 16/32.5, 16/41;
    .25, .437, .562, .937, 1.375, 1.781, 18/17, 18/21, 0.692, 18/32.5, 0.439;
    .25, .5, .593, 1.031, 1.5, 1.968, 20/17, 20/21, 0.769, 20/32.5, 0.488;
    .25, .562, .687, 1.218, 1.812, 2.343, 24/17, 24/21, 0.923, 22/32.5, 0.585
]*in
AvgInnerDiameter := [
    0, 0, 0, 0, 0, 0, 0, 0, 0, 0, 0;
    0, 0, 0, 0, 0, 0, 0, 0, 0, 0, 0;
    0, 0, 0, 0, 0, 0, 0, 0, 0, 0, 0;
    0, 0, 0, 0, 0, 0, 0, 0, 0, 0, 0;
    0, 0, 0, 0, 0, 0, 0, 0.91, 0, 0, 0;
    0, 0, 0, 0, 0, 0, 0, 1.169, 1.175, 1.169, 0;
    0, 0, 0, 0, 0, 0, 0, 1.482, 1.512, 1.482, 0;
    0, 0, 0, 0, 0, 0, 0, 1.7, 1.734, 1.7, 0;
    0, 0, 0, 0, 0, 0, 0, 2.129, 2.173, 2.129, 0;
    0, 0, 0, 0, 0, 0, 0, 2.581, 2.635, 2.581, 0;
    0, 0, 0, 0, 0, 0, 0, 3.146, 3.210, 3.146, 0;
    0, 0, 0, 0, 0, 0, 0, 3.597, 3.672, 3.597, 0;
    0, 0, 0, 0, 0, 0, 0, 4.046, 4.134, 4.046, 0;
    0, 0, 0, 0, 0, 0, 0, 5.001, 5.108, 5.001, 0;
    0, 0, 0, 0, 0, 0, 0, 5.955, 6.084, 5.955, 0;
    0, 0, 0, 0, 0, 0, 0, 7.756, 7.921, 7.756, 0;
    0, 0, 0, 0, 0, 0, 0, 0, 9.874, 0, 0;
    0, 0, 0, 0, 0, 0, 0, 0, 11.711, 0, 0;
    0, 0, 0, 0, 0, 0, 0, 0, 12.860, 0, 0;
    0, 0, 0, 0, 0, 0, 0, 0, 13.785, 0, 0;
    0, 0, 0, 0, 0, 0, 0, 0, 14.696, 0, 0;
    0, 0, 0, 0, 0, 0, 0, 0, 16.533, 0, 17.061;
    0, 0, 0, 0, 0, 0, 0, 0, 18.370, 0, 18.956;
    0, 0, 0, 0, 0, 0, 0, 0, 22.043, 0, 22.748
]*in
UsingPipes := CountryPipes[:, Country]
# Actual inner diameter of a pipe
# Returns a value of inner diameter for a given pipe specification and a nominal pipe size.
innerdiameter(NominalPipeSize, PipeSpecification) :=
    WallThick ← MinWallThickness[index(NominalPipeSize, Pipesizes[:, 0]), PipeSpecification]
    ID ← Pipesizes[index(NominalPipeSize, Pipesizes[:, 0]), 1] - (2*WallThick) if WallThick ≠ 0
    ID ← 0 if WallThick == 0
    IDThick ← AvgInnerDiameter[index(NominalPipeSize, Pipesizes[:, 0]), PipeSpecification]
    return 0 if UsingPipes[index(NominalPipeSize, Pipesizes[:, 0])] == 0
    return IDThick if ((IDThick < ID) and (IDThick ≠ 0))
    return ID otherwise
NominalPipeSize(PipeSize) :=
    for i ∈ 0 .. length(Pipesizes[:, 0]) - 1
        NominalPipeSize ← Pipesizes[:, 0][i] if UsingPipes[i] ≠ 0
        break if PipeSize ≤ NominalPipeSize
# NominalPipeSize(PipeSize)
# Until the nominal pipe size is larger than the given pipe size the index is increased
# Once the criterion is met the for loop is broken and the nominal pipe size last found is returned
# If none are larger than the given the largest nominal pipe size is returned
# Example:NominalPipeSize(6.941 in)=8 in
IDindex(index, PipeSpecification) :=
    WallThick ← MinWallThickness[index, PipeSpecification] if UsingPipes[index] ≠ 0
    WallThick ← 0 otherwise
    ID ← Pipesizes[index, 1] - (2*WallThick) if WallThick ≠ 0
    ID ← 0 if WallThick == 0
    NominalSize ← Pipesizes[index, 0]
    IDThick ← [ID, NominalSize]
    ID ← AvgInnerDiameter[index, PipeSpecification] if (AvgInnerDiameter[index, PipeSpecification] < ID)
    return IDThick
# IDindex(index, PipeSpecification)
# This function is similar to innerdiameter(NominalPipeSize, PipeSpecification)
# except that it also returns the nominal pipe size. Thus it outputs a 1x2
# array of inner diameter and nominal pipe size. However instead of inputing
# the nominal pipe size you input the corresponding index number for the
# row of the Pipesizes matrix.
pipefittings := [
    1/8*in, 0 in, 0 in, 0 in, 0 in, 0 in, 0 in, 0 in, 0 in, 0 in, 0 in, 0 in, 0 in, 0 in;
    1/4*in, 0 in, 0 in, 0 in, 0 in, 0 in, 0 in, 1.325 in, 0 in, 0 in, 0 in, 0 in, 0 in, 0 in;
    3/8*in, 0 in, 0 in, 0 in, 7/8*in, 1 in, 0 in, 1.5938 in, 0 in, 0 in, 0 in, 0 in, 0 in, 0 in;
    1/2*in, 1.5*1/2*in, 1 in, 0.2*1/2*in, (1 + 3/32)*in, (1 + 1/32)*in, (1 + 23/32)*in, 1.8438 in, 0 in, 0 in, 0 in, .25 in, (1 + 7/16)*in, (1 + 3/16)*in;
    3/4*in, (1 + 1/8)*in, (1 + 1/8)*in, 0.2*3/4*in, (1 + 5/16)*in, (1 + 5/16)*in, (1 + 5/8)*in, 2.0938 in, 2.375 in, 1.217 in, 1.05 in, 5/16*in, (1 + 11/16)*in, (1 + 3/8)*in;
    1 in, 1.5 in, 1.5 in, 27 mm, (1 + 9/16)*in, (1 + 9/16)*in, (2 + 3/16)*in, 2.3438 in, 2.375 in, 1.482 in, 1.315 in, 9/32*in, (2 + 3/32)*in, (1 + 13/16)*in;
    1.25 in, 1.5*5/4*in, 0.718*5/4*in, 0.2*5/4*in, (1 + 31/32)*in, (1 + 3/4)*in, (2 + 17/32)*in, 2.5938 in, 3.5 in, 1.827 in, 1.66 in, 3/8*in, (2 + 5/8)*in, 2.25 in;
    1.5 in, 2.25 in, 2.25 in, 32 mm, (2 + 1/4)*in, (1 + 7/8)*in, (2 + 9/16)*in, 2.8438 in, 3.4375 in, 2.067 in, 1.9 in, .5 in, (2 + 17/16)*in, (2 + 19/32)*in;
    2 in, 3 in, 2.5 in, 46 mm, (2 + 22/32)*in, (2 + 1/32)*in, (2 + 11/16)*in, 3.65 in, 3.5 in, 2.542 in, 2.375 in, 19/32*in, (3 + 26/32)*in, (3 + 7/32)*in;
    2.5 in, 3.75 in, 3 in, 46 mm, (3 + 5/16)*in, (2 + 9/16)*in, (3 + 7/8)*in, 3.6875 in, 0 in, 0 in, 0 in, 1 in, 5.75 in, 5.25 in;
    3 in, 4.5 in, (3 + 3/8)*in, 46 mm, 4 in, (2 + 29/32)*in, (3 + 15/16)*in, 3.9375 in, 4 in, 3.75 in, 3.5 in, 7/8*in, (4 + 15/16)*in, (4 + 9/16)*in;
    3.5 in, 1.5*7/2*in, 0.718*3.5*in, 0.2*5/4*in, 1.04*7/2*in, 0.49*7/2*in, 0.7*3.5*in, 0.8*7/2*in, 0 in, 0 in, 0 in, 0 in, 0 in, 0 in;
    4 in, 6 in, (4 + 1/8)*in, 57 mm, (5 + 1/16)*in, (3 + 1/8)*in, (4 + 3/32)*in, 4.6875 in, 4 in, 4.75 in, 4.5 in, (1 + 7/32)*in, (6 + 7/32)*in, (5 + 23/32)*in;
    5 in, 195 mm, 127 mm, 57 mm, (6 + 5/32)*in, (4 + 1/2)*in, (5 + 3/16)*in, (6 + 9/32)*in, 4 in, 5.813 in, 5.563 in, (3 + 3/4)*in, 13.125 in, (9 + 3/8)*in;
    6 in, 9 in, (5 + 5/8)*in, 57 mm, (7 + 1/4)*in, 5 in, (5 + 27/32)*in, 6.25 in, 5.75 in, 6.875 in, 6.625 in, (1 + 5/16)*in, (9 + 6/16)*in, (8 + 21/32)*in;
    8 in, 12 in, 7 in, 64 mm, (9 + 5/16)*in, (6 + 3/8)*in, (7 + 1/8)*in, 8.25 in, 6 in, 8.875 in, 8.625 in, (1 + 15/16)*in, (13 + 9/32)*in, (11 + 11/32)*in;
    10 in, 15 in, 8.5 in, 70 mm, (11 + 13/16)*in, (5 + 1/4)*in, 0.7*10*in, 0.8*10 in, 5.875 in, 11 in, 10.75 in, 2.5*in, (16 + 15/32)*in, (16 + 7/8)*in;
    12 in, 18 in, 10 in, 76 mm, (13 + 7/8)*in, (6 + 3/4)*in, 0.7*12*in, 0.8*12 in, 6.3125 in, 13 in, 12.75 in, (2 + 11/16)*in, (18 + 29/32)*in, (16 + 1/8)*in;
    14 in, 21 in, 11 in, 89 mm, 15 in, (7 + 3/8)*in, 0.7*14*in, 0.8*14 in, 0 in, 0 in, 0 in, (7 + 3/16)*in, (28 + 6/16)*in, (21 + 3/16)*in;
    15 in, 1.5*15*in, 0.718*15*in, 0.2*15*in, 1.04*15*in, 0.49*15*in, 0.7*15*in, 0.8*15*in, 0 in, 0 in, 0 in, 0 in, 0 in, 0 in;
    16 in, 24 in, 12 in, 102 mm, 17 in, 9 in, 0.7*16*in, 0.8*16 in, 0 in, 0 in, 0 in, 8.75 in, 33.25 in, 24.75 in;
    18 in, 27 in, 13.5 in, 105 mm, (19 + 1/16)*in, 9 in, 0.7*18*in, 0.8*18 in, 9.875 in, 18.25 in, 18 in, (9 + 7/16)*in, (36 + 14/16)*in, (27 + 7/16)*in;
    20 in, 30 in, 15 in, 111 mm, (21 + 3/16)*in, (12 + 1/4)*in, 0.7*20*in, 0.8*20*in, 0 in, 0 in, 0 in, (11 + 7/16)*in, (41 + 12/16)*in, (30 + 5/16)*in;
    24 in, 36 in, 17 in, 127 mm, 1.04*24*in, 0.49*24*in, 0.7*24*in, 0.8*24*in, 0 in, 0 in, 0 in, 11 in, 46 in, 35 in
]
AvailND :=
    i ← 0
    j ← 0
    while i ≤ last(Pipesizes[:, 0]) and j ≤ last(Pipesizes[:, 0])
        if CountryPipes[:, Country][j] ≠ 0
            ND[i] ← Pipesizes[:, 0][j]
            i ← i + 1
        j ← j + 1
    ND
AvailPipeSizes(PipeSpecification) :=
    j ← 0
    for i ∈ 0, 1 .. length(Pipesizes[:, 0]) - 1
        if UsingPipes[i] ≠ 0
            InnerDiameter ← IDindex(i, PipeSpecification)
            if InnerDiameter[:, 0] ≠ [0]
                Sizes[j, 0] ← InnerDiameter[:, 0][0]
                Sizes[j, 1] ← InnerDiameter[:, 1][0]
                j ← j + 1
    return Sizes
# AvailPipeSizes(PipeSpecification)
# This function returns an array of available pipe sizes given a
# pipe specification. For every row in the Pipesizes matrix it calculates
# the inner diameter from IDindex which returns the inner diameter and
# the nominal pipe size. If the inner diameter is not equal to zero the pipe
# exists and the inner diameters are returned in the first column and
# the nominal pipe sizes are returned in the second.
NominalDiameter(ID_pipe, PipeSpecification) :=
    i ← 0
    while AvailPipeSizes(PipeSpecification)[:, 0][i] < ID_pipe
        i ← i + 1
        break if i == last(AvailPipeSizes(PipeSpecification)[:, 0])
    return AvailPipeSizes(PipeSpecification)[i, 1]  # Given minimum ID of a pipe it returns the nominal pipe size
ConRadius(NominalPipeSize) := 0.5*pipefittings[index(NominalPipeSize, Pipesizes[:, 0]), 4]
outerdiameter(NominalPipeSize) :=
    return Pipesizes[index(NominalPipeSize, Pipesizes[:, 0]), 1] if UsingPipes[index(NominalPipeSize, Pipesizes[:, 0])] ≠ 0
    return 0 otherwise  # Outerdiameter returns the average outer diameter of a pipe based on its nominal pipe size
# Outerradius finds the radius based on the Outerdiameter
outerradius(NominalPipeSize) := outerdiameter(NominalPipeSize)/2
CapDiameter(NominalPipeSize) := pipefittings[index(NominalPipeSize, Pipesizes[:, 0]), 4]
CapThickness(NominalPipeSize) := CapDiameter(NominalPipeSize)/2 - outerradius(NominalPipeSize)
ValveLength(ND) := 0.1399/0.1143*2*outerradius(ND)  # based on library butterfly valve dimensions
CouplingLength(NominalPipeSize) := pipefittings[index(NominalPipeSize, Pipesizes[:, 0]), 7]
CapHeight(NominalPipeSize) := pipefittings[index(NominalPipeSize, Pipesizes[:, 0]), 5]
SocketDepth(NominalPipeSize) := pipefittings[index(NominalPipeSize, Pipesizes[:, 0]), 3]
ElbowRadius(NominalPipeSize) := pipefittings[index(NominalPipeSize, Pipesizes[:, 0]), 1]
OuterDiameterFittingPVC(NominalPipeSize) := pipefittings[index(NominalPipeSize, Pipesizes[:, 0]), 4]
innerD(PipeSize, PipeSpecification) :=
    NominalPipeSize ← NominalPipeSize(PipeSize)
    ID ← innerdiameter(NominalPipeSize, PipeSpecification)
    return ID
# innerD(PipeSize, PipeSpecification)
# 1. Have to find the first nominal pipe size for the pipe size given
# 2. Calculate the inner diameter based on innerdiameter(NominalPipeSize, PipeSpecification)
# Example:innerD(6.941 in, 8)=7.921 in
ShortTeeLength(NominalPipeSize) := pipefittings[index(NominalPipeSize, Pipesizes[:, 0]), 2]
# FERNCO
# Uncut
# Length
# ND | ID | OD
FerncoCouplingDimensions := [
    1, 1.32, 1.72, 2.38;
    1.5, 1.94, 2.43, 3.43;
    2, 2.41, 2.9, 3.45;
    3, 3.46, 4.25, 3.98;
    4, 4.58, 5.22, 4.02;
    5, 5.52, 6.16, 3.97;
    6, 6.6, 7.32, 5.74;
    8, 8.64, 9.03, 6.04;
    10, 10.63, 11.77, 5.89;
    12, 12.52, 13.54, 6.32;
    15, 15.4, 16.49, 10
]*in
FerncoOuterDiameter(ND) := FerncoCouplingDimensions[index(ND, FerncoCouplingDimensions[:, 0]), 2]
# Revision 6010, imported on February 28th, 2014
# Materials Database
USD := ¤  # Defining US Dollars as a currency unit
EN_MatApply := 1
E_Pvc := 0.12 mm
E_Concrete := 2 mm
T_ConcreteMin := 5 cm  # used throughout the code
EN_DrillSeries := 0
# Materials - Sedimentation Tank
L_SedPlateSheet := 300 cm
W_SedPlate := 42 in
W_SedBay := W_SedPlate
T_SedWallDivider := 15 cm
T_SedWeir := 4 cm
T_SedPlate := 0.2 cm
AN_SedPlate := 60 deg
N_SedModulePlatesMin := 8
L_SedPlateCantilevered := 20 cm
S_SedPlateMin := 2.5 cm
# This is to prevent floc roll up. We should specify this in a more fundamental way. (based on velocity gradients)
S_SedPlate := S_SedPlateMin
B_SedPlate := S_SedPlate + T_SedPlate
N_SedModulePlatesMax := floor(L_SedPlateCantilevered/B_SedPlate*tan(AN_SedPlate) + 1) = 13
# Maximum length of sed plate sticking out past module pipes without any additional support. The goal is to prevent floppy modules that don't maintain constant distances between the plates
T_FlocBaffleRigidH := 15 cm
PlateIndex :=
    for j ∈ N_SedModulePlatesMin .. N_SedModulePlatesMax
        for i ∈ 0 .. 50
            matrix[i, j - N_SedModulePlatesMin] ← j*(i + 1)
    array ← matrix[:, 0]
    for j ∈ N_SedModulePlatesMin + 1 .. N_SedModulePlatesMax
        array ← stack(array, matrix[:, j - N_SedModulePlatesMin])
    array ← sort(array)
    i ← 0
    while i < (last(array) - 1)
        array ← stack(submatrix(array, 0, i, 0, 0), submatrix(array, i + 2, last(array), 0, 0)) if array[i] == array[i + 1]
        array ← submatrix(array, 0, i + 1, 0, 0) if (i + 1 == i + 2 and i + 2 == last(array))
        i ← i + 1
    return array
T_FlocBaffleRigidV := 5 cm
ND_SedDiffuser := 1 in
ND_SedJetReverser := 3 in
# Materials - SRSF
S_FiTrunkMin := 3 cm  # Minimum vertical spacing between trunk line pipes going through the filter wall for concrete construction
k_Kozeny := 5  # Carman-Kozeny coefficient
D_FiSandES := 0.5 mm
Pi_UCFiSand := 1.65
D_FiSand60 := D_FiSandES*Pi_UCFiSand = 0.825 mm
ε_FiSand := 0.4  # Porosity in a sand bed
T_FiWall := 25 cm
ND_FiBwManBranch := 1.5 in
L_FiManFerncoCoupling := 4 cm
ND_FiManBranch := 1 in
# We are going to take this pipe size for the slotted pipes as a given. Larger pipes may block too much flow and they are harder to install.
Rho_FiSand := 2650*kg/m^3
ND_FiBwBranchHolder := 2 in
ND_FiBranchHolder := 2 in
# Space between the ends of the branch receiver pipes and the walls so that the manifold assemblies are easy to lower into the filter boxes (if the branch receivers extended the entire length of the box they would just barely fit and it would be hard to get into place.
S_FiManAssembly := 1 cm
Pi_FiFluidized := 1.3  # Bed expands 30% when fluidized
W_FiManSlots := 0.008 in = 0.2032 mm  # A slot thickness of 0.008 in or 0.2 mm is selected so that sand will not enter the slotted pipes.
# Materials - Flocculator
T_FlocChannelWallMidFlow := 15 cm  # The diameter of the oversized cap used to assemble the floc modules
ND_FlocModulesLarge := 1.5 in
L_ChannelSlot := 5 cm
# Low flow flocculator ferrocement slots - length extending into the flocculator wall
# Materials - Entrance Tank
ND_EtFloat := 8 in
ND_EtDrain := 3 in
# This is constant for now
T_EtRemovableWallSupport := 5 cm
T_EtRemovableWall := 5 cm
T_EtHopperLedge := 15 cm
# Materials - Plant
T_PlantWall := 15 cm
T_ChannelWall := 15 cm
# Drill Series
D_DrillEng :=
    i ← 0
    D_DrillEng[0] ← 1/32*in
    while D_DrillEng[i] ≤ 3/16*in - 1/128*in
        i ← i + 1
        D_DrillEng[i] ← D_DrillEng[i - 1] + 1/128*in
    while D_DrillEng[i] < 1 in - 1/16*in
        i ← i + 1
        D_DrillEng[i] ← D_DrillEng[i - 1] + 1/16*in
    while D_DrillEng[i] < 2 in
        i ← i + 1
        D_DrillEng[i] ← D_DrillEng[i - 1] + 1/4*in
    return D_DrillEng
D_DrillMet :=
    i ← 0
    D_DrillMet[0] ← 0.5 mm
    while D_DrillMet[i] ≤ 5 mm - 0.1 mm
        i ← i + 1
        D_DrillMet[i] ← D_DrillMet[i - 1] + 0.1 mm
    while D_DrillMet[i] < 20 mm
        i ← i + 1
        D_DrillMet[i] ← D_DrillMet[i - 1] + 1 mm
    while D_DrillMet[i] < 50 mm
        i ← i + 1
        D_DrillMet[i] ← D_DrillMet[i - 1] + 2 mm
    return D_DrillMet
D_Drill :=
    D_Drill ← D_DrillEng if EN_DrillSeries == 0
    D_Drill ← D_DrillMet otherwise
# Fluid Functions | Revision 6010, imported on February 28th, 2014
## Reynolds Number
Re_pipetransition := 2100  # transition between laminar and turbulent flow
R_h(w, b, open) :=
    w*b/(w + 2*b) if open == 1
    w*b/(2*(w + b)) otherwise  # hydraulic radius
# Note: if open=1, the channel is open.
# Otherwise, the channel is assumed to have 4 wetted sides
R_hGen(A, WP) := A/WP  # area/(wetted perimeter)
Re_Pipe(Q, D, ν) := 4*Q/(π*D*ν)  # originally: Re == ρVl/μ , where l is a "characteristic length" (in this case l = D)
Re_rect(Q, w, b, ν, open) := 4*Q*R_h(w, b, open)/(w*b*ν)  # Reynolds number for rectangular channel; open = 0 if all sides are wetted; l = D and D = 4*R.h
# Reynolds number for general cross-section
Re_Gen(V, A, WP, ν) := 4*R_hGen(A, WP)*V/ν
## Friction Coefficient
f(Q, D, ν, ε) :=
    f ← 0.25/log(ε/(3.7*D) + 5.74/Re_Pipe(Q, D, ν)^0.9)^2 if Re_Pipe(Q, D, ν) > Re_pipetransition
    f ← 64/Re_Pipe(Q, D, ν) otherwise
    return f  # Swamee-Jain friction factor for turbulent flow; best for Re>3000 and ε/D < 0.02
# in general for laminar flow in pipe
f_rect(Q, w, b, ν, ε, open) :=
    f ← 0.25/log(ε/(3.7*4*R_h(w, b, open)) + 5.74/Re_rect(Q, w, b, ν, open)^0.9)^2 if Re_rect(Q, w, b, ν, open) > Re_pipetransition
    f ← 64/Re_rect(Q, w, b, ν, open) otherwise
    return f
# Swamee-Jain friction factor adapted for rectangular channel.
# D = 4R.h in this case.
# in general for laminar flow in rectangular channel
f_Gen(A, WP, V, ν, ε) :=
    f ← 0.25/log(ε/(3.7*4*R_hGen(A, WP)) + 5.74/Re_Gen(V, A, WP, ν)^0.9)^2 if Re_Gen(V, A, WP, ν) > Re_pipetransition
    f ← 64/Re_Gen(V, A, WP, ν) otherwise
    return f
# Swamee-Jain friction factor adapted for any cross-section.
# D = 4R.h
# in general for laminar flow for any cross-section
## Head Loss Calculations
# In a Pipe | In a Rectangular Channel | In the General Case
# major losses (caused by shear)
h_f(Q, D, L, ν, ε) := f(Q, D, ν, ε)*8/(g*π^2)*L*Q^2/D^5
h_frect(Q, w, b, L, ν, ε, open) := f_rect(Q, w, b, ν, ε, open)*L/(4*R_h(w, b, open))*Q^2/(2*g*(w*b)^2)
h_fGen(A, WP, V, L, ν, ε) := f_Gen(A, WP, V, ν, ε)*L/(4*R_hGen(A, WP))*V^2/(2*g)
# From Darcy-Weisbach h_f == f*L/D*V^2/(2*g)
# minor losses (caused by flow expansions)
h_e(Q, D, K) := K*8/(g*π^2)*Q^2/D^4
h_erect(Q, w, b, K) := K*Q^2/(2*g*(w*b)^2)
h_eGen(V, K) := K*V^2/(2*g)
# This is total head loss due to major and minor losses
h_l(Q, D, L, K, ν, ε) := h_e(Q, D, K) + h_f(Q, D, L, ν, ε)
h_lrect(Q, w, b, L, K, ν, ε, open) := h_erect(Q, w, b, K) + h_frect(Q, w, b, L, ν, ε, open)
h_lGen(V, WP, L, K, ν, ε) := h_eGen(V, K) + h_fGen(A, WP, V, L, ν, ε)
# ________________________________________________________________________________________________________
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# Pressure Coefficient:
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C_p(Q, D, L, K, ν, ε) := f(Q, D, ν, ε)*L/D + K
# This is total head loss through the manifold
HL_Manifold(Q, D, L, K, ν, ε, n) := h_l(Q, D, L, K, ν, ε)*(1/3 + 1/(2*n) + 1/(6*n^2))
h_frectreal(Q, w, L, ν, ε, open) :=
    h_temp ← 1 m
    h_tempprev ← h_frect(Q, w, h_temp, L, ν, ε, open)
    error ← 1
    while error > 0.01
        h_temp ← h_tempprev
        h_tempprev ← (f_rect(Q, w, h_temp, ν, ε, open)*L*Q^2*(2 + w/h_temp)/(8*g*(w/h_temp)^3))^(1/6)
        error ← 0 if h_tempprev == 0 m
        error ← |h_temp - h_tempprev|/mean(h_temp, h_tempprev) otherwise
    return h_tempprev
## Orifice Equations
A_circle(D_circle) := π*D_circle^2/4
D_circle(A_circle) := sqrt(4*A_circle/π)
Q_orifice(D, h, Pi_VenaContractaOrifice) :=
    Q ← Pi_VenaContractaOrifice*A_circle(D)*sqrt(2*g*h) if h > 0 cm
    Q ← 0*L/s otherwise
    return Q  # modified to report zero flows if the orifice isn't submerged!
Q_orificeV(D, h, Pi_VenaContractaOrifice) :=
    Q ← Pi_VenaContractaOrifice*sqrt(2*g)*integral(D*sin(acos(z/(D/2)))*sqrt(h - z), z = -D/2 .. min(D/2, h)) if h > (-D/2 + 10^-13*m)
    Q ← 0*L/s otherwise
    return Q
# equation 4-31 from the following website:
# http://il.water.usgs.gov/proj/feq/fequtl98.i2h/4_7aupdate.html
# The 10^-13m is required to prevent the integration function from failure due to some Mathcad numerical error. this adjustment is small enough to not cause an detectable error in the resulting flow rate.
h_orifice(D, Pi_VenaContractaOrifice, Q) := (Q/(Pi_VenaContractaOrifice*A_circle(D)))^2*1/(2*g)
A_orifice(h, Pi_VenaContractaOrifice, Q) := Q/(Pi_VenaContractaOrifice*sqrt(2*g*h))
n_orifices(Q_plant, Pi_VenaContractaOrifice, Δh_orifice, D_orifice) := ceil(A_orifice(Δh_orifice, Pi_VenaContractaOrifice, Q_plant)/A_circle(D_orifice))
d_orificemanifold(Q_manifoldratio, Q_tank, d_pipe, L_s, L_l, K_total, n_orifice, ν, ε, Pi_VenaContractaOrifice) := nthroot((1 - Q_manifoldratio)*d_pipe^4/(((K_total + f(Q_tank, d_pipe, ν, ε)*L_l/d_pipe)*Q_manifoldratio - K_total - f(Q_tank, d_pipe, ν, ε)*L_s/d_pipe)*Pi_VenaContractaOrifice^2*n_orifice^2), 4)
## Flow Equations
Q_transition(D, ν) := π*D*Re_pipetransition*ν/4
# Hagen-Poiseuille
Q_hagen(D, h_f, L, ν) := π*D^4/(128*ν)*g*h_f/L
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Q_SJ(D, h_f, L, ν, ε) := -π/sqrt(2)*D^(5/2)*sqrt(g*h_f/L)*log(ε/(3.7*D) + 2.51*ν*sqrt(L/(2*g*h_f*D^3)))
Q_pipemajor(D, h_f, L, ν, ε) :=
    Q_hagen(D, h_f, L, ν) if Q_hagen(D, h_f, L, ν) < Q_transition(D, ν)
    Q_SJ(D, h_f, L, ν, ε) otherwise  # This function calculates the flow through a pipe under either laminar or turbulent flow when there are only major losses
Q_pipeminor(D, h_e, K) := A_circle(D)*sqrt(2*g*h_e/K)
# This function uses iteration to calculate the flow through a pipe system. It works for laminar or turbulent flow.
Q_pipetotal(D, h_l, L, ν, ε, K) :=
    Q_tempprev ← Q_pipemajor(D, h_l, L, ν, ε) if K == 0
    otherwise
        Q_temp ← 0*m^3/s
        error ← 1
        Q_tempprev ← min(Q_pipemajor(D, h_l, L, ν, ε), Q_pipeminor(D, h_l, K))
        while error > 0.01
            Q_temp ← Q_tempprev
            h_fnew ← h_l*h_f(Q_temp, D, L, ν, ε)/(h_f(Q_temp, D, L, ν, ε) + h_e(Q_temp, D, K))
            Q_tempprev ← Q_pipemajor(D, h_fnew, L, ν, ε)
            error ← 0 if Q_tempprev == 0*m^3/s
            error ← |Q_temp - Q_tempprev|/mean(Q_temp, Q_tempprev) otherwise
    return Q_tempprev
# get a better estimate of the major losses. Adjust it by the ratio of the actual head loss to the calculated total head loss
## Pipe Diameter Equations
# D.Hagen is only valid for laminar flow
D_Hagen(Q, h_f, L, ν) := (128*ν*Q*L/(g*h_f*π))^(1/4)
# D.Swamee is only valid for turbulent flow
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D_Swamee(Q, h_f, L, ν, ε) := 0.66*(ε^(5/4)*(L*Q^2/(g*h_f))^4.75 + ν*Q^9.4*(L/(g*h_f))^5.2)^0.04
# Only including major losses but valid for laminar or turbulent flow
D_PipeMajor(Q, h_f, L, ν, ε) :=
    D_Laminar ← D_Hagen(Q, h_f, L, ν)
    D_PipeMajor ← D_Laminar if Re_Pipe(Q, D_Laminar, ν) ≤ Re_pipetransition
    D_PipeMajor ← D_Swamee(Q, h_f, L, ν, ε) otherwise
    return D_PipeMajor
D_PipeMinor(Q, h_e, K) := (4*Q/π)^(1/2)*(K/(2*g*h_e))^(1/4)  # This is the same for laminar and turbulent flow
# This function uses iteration to calculate the pipe diameter required given a set of flow and pipe constraints. This is for sizing a pipe given both major and minor losses and is applicable for both laminar and turbulent flow.
D_PipeTotal(Q, h_l, L, ν, ε, K) :=
    D_Temp ← D_PipeMajor(Q, h_l, L, ν, ε) if K == 0
    otherwise
        D_Temp ← max(D_PipeMajor(Q, h_l, L, ν, ε), D_PipeMinor(Q, h_l, K))
        error ← 1
        while error > 0.001
            D_TempPrev ← D_Temp
            h_fnew ← h_l*h_f(Q, D_Temp, L, ν, ε)/(h_f(Q, D_Temp, L, ν, ε) + h_e(Q, D_Temp, K))
            D_Temp ← D_PipeMajor(Q, h_fnew, L, ν, ε)
            error ← |D_Temp - D_TempPrev|/mean(D_Temp, D_TempPrev)
    return D_Temp
# The functions below could easily be simplied using the function above to eliminate iteration.
# We should create one more function that returns a pipe diameter given a set of available pipes and then eliminate the functions below.
D_pipe(Q, D_available, h_l, L, ν, ε, K) :=
    i ← 0
    while Q > Q_pipetotal(D_available[i], h_l, L, ν, ε, K)
        i ← i + 1
    return D_available[i]
D_pipeschedule(Q, PipeSpecification, h_l, L, ν, ε, K) :=
    D_available ← AvailPipeSizes(PipeSpecification)[:, 0]
    i ← 0
    while Q > Q_pipetotal(D_available[i], h_l, L, ν, ε, K)
        i ← i + 1
    return AvailPipeSizes(PipeSpecification)[:, 1][i]
# Given pipe spec will return nominal pipe size!
D_nextlargest(D, D_available) :=
    i ← 0
    while D_available[i] < D
        i ← i + 1
        break if i == last(D_available)
    return D_available[i]
Dpipelarger(D, D_available) :=
    i ← 0
    while D_available[i] ≤ D
        i ← i + 1
        break if i == last(D_available)
    return D_available[i]
# This one rounds up even if the given pipe size is exactly correct to make it possible to go to a larger pipe if the given pipe isn't actually adequate. It is currently used in the pipe launder program
# This calculates an internal diameter of a pipe for a given pressure recovery constraint. This is useful to design manifolds where major losses are negligible.
ID_Manifold(Q_Manifold, PR_Max) := sqrt(Q_Manifold/(π/4*sqrt(2*g*PR_Max)))
# returns minimum manifold ID (doesn't account for available sizes)
D_Manifold(Q, h, L_manifold, Q_ratio, ν, ε, K, n) :=
    D_new ← 2 in
    D_old ← 0 in
    error ← 1
    while error > 0.01
        D_old ← D_new
        D_new ← (8*Q^2/(g*π^2*h)*(1 + (f(Q, D_old, ν, ε)*L_manifold/D_old + K)*(1/3 + 1/(2*n) + 1/(6*n^2)))/(1 - Q_ratio^2))^(1/4)
        error ← |D_old - D_new|/mean(D_old, D_new)
    return D_new
ND_Manifold(Q, h, L_manifold, Q_ratio, PipeSpecification, ν, ε, K, n) := NominalDiameter(D_Manifold(Q, h, L_manifold, Q_ratio, ν, ε, K, n), PipeSpecification)
# Given pipe spec will return nominal pipe size!
# This gives a good estimate for the area
# of the manifold.
A_Manifold(Q, h, L_manifold, Q_ratio, ν, ε, K, n) := D_Manifold(Q, h, L_manifold, Q_ratio, ν, ε, K, n)^2*π/4
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D_TankDrain(L_Tank, W_Tank, H_Tank, Ti_Drain, K) := sqrt(8*L_Tank*W_Tank/(π*Ti_Drain))*(K*H_Tank/(2*g))^(1/4)
ND_EqualParallelFlow(Q, Q_ratio, h_max, L_min, L_max, K_min, K_max, PipeSpecification, ν, ε) :=
    D_available ← AvailPipeSizes(PipeSpecification)[:, 0]
    D_new ← D_available[0]
    D_old ← 0 in
    error ← 1
    while error > 0.01
        D_old ← D_new
        ΔC_p ← K_max - K_min + f(Q, D_old, ν, ε)*(L_max - L_min)/D_old
        D_new ← (8/(g*π^2*h_max)*ΔC_p*Q_ratio^2/(1 - Q_ratio^2))^(1/4)*sqrt(2*Q/(1 + Q_ratio))
        error ← |D_old - D_new|/mean(D_old, D_new)
    return NominalDiameter(D_new, PipeSpecification)
# This function provides equal flow between parallel pipes
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D_orifices(HL_Launder, Q_Plant, D_Launder, N_Orifices, HW_SedTank, K_Orifice) := D_circle(A_orifice(HW_SedTank - HL_Launder - Q_Plant^2/(2*g*A_circle(D_Launder)^2), K_Orifice, Q_Plant/N_Orifices))
## Horizontal Channel Functions
# manifold is 0 for a channel that has constant flow. Manifold is 1 for a channel that has inflow along the length of the channel
W_HorizChannel(Q, H, ΔH, L_Channel, ν, ε, manifold) :=
    ΔH_Local ← min(ΔH, 1/3*H)
    W_new ← Q/((H - ΔH_Local)*sqrt(2*g*ΔH_Local))
    error ← 1
    i ← 0
    while (error > .001) and (i < 20)
        W ← W_new
        i ← i + 1
        W_new ← sqrt((1 + f_rect(Q, W, H - ΔH_Local, ν, ε, 1)*L_Channel/(4*R_h(W, H - ΔH_Local, 1))*(1 - 2*manifold/3))/(2*g*ΔH_Local))*Q/(H - ΔH_Local)
        error ← |W_new - W|/(W_new + W)
    return W_new
# The head loss in the channel is 1/3 the head loss that is calculated in a rectangular channel for the case of manifold flow because channel is receiving flow all along the channel. Thus the (1 - 2*manifold/3) factor is from manifold analysis.
#
# The width is based on conservation of energy assuming that the velocity at the upstream end of the channel is zero.
# Note that it isn't possible for ΔH to be larger than 1/3H because that would require supercritical flow in the channel and that isn't possible because the bottom slope of this channel is horizontal.
#
# Thus you can obtain the minimum possible width by entering a large ΔH
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W_HorizChannelMin(Q, H, L_Channel, ν, ε, manifold) := W_HorizChannel(Q, H, H/3, L_Channel, ν, ε, manifold)
# This function finds the minimum channel width. To create a safety factor I'd suggest using an H that is slightly reduced from the actual available H. For example, for a 20 cm deep channel, consider using 18 cm.
H_HorizChannel(Q, W_Channel, ΔH, L_Channel, ν, ε, manifold) :=
    H_new ← Q/(W_Channel*sqrt(2*g*ΔH)) + ΔH
    error ← 1
    i ← 0
    while (error > .001) and (i < 200)
        H ← H_new
        ΔH_Local ← min(ΔH, 1/3*H)
        i ← i + 1
        H_new ← Q/W_Channel*sqrt((1 + f_rect(Q, W_Channel, H - ΔH_Local, ν, ε, 1)*L_Channel/(4*R_h(W_Channel, H - ΔH_Local, 1))*(1 - 2*manifold/3))/(2*g*ΔH_Local)) + ΔH_Local
        error ← |H_new - H|/(H_new + H)
    return H_new
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H_HorizChannelMin(Q, W_Channel, L_Channel, ν, ε, manifold) :=
    H_new ← Q/(W_Channel*sqrt(2*g*5*m)) + 5 m
    error ← 1
    i ← 0
    while (error > .001) and (i < 200)
        H ← H_new
        ΔH_Local ← H/3
        i ← i + 1
        H_new ← Q/W_Channel*sqrt((1 + f_rect(Q, W_Channel, H - ΔH_Local, ν, ε, 1)*L_Channel/(4*R_h(W_Channel, H - ΔH_Local, 1))*(1 - 2*manifold/3))/(2*g*ΔH_Local)) + ΔH_Local
        error ← |H_new - H|/(H_new + H)
    return H_new
# The function below calculates the depth of a channel given a ratio of channel H/W (Π.Channel) and change in depth in the channel from one end to the other.
H_HorizChannelΠ(Q, Π_Channel, ΔH, L_Channel, ν, ε, manifold) :=
    H_new ← sqrt(Q/(Π_Channel*sqrt(2*g*ΔH)))
    W_new ← H_new/Π_Channel
    error ← 1
    i ← 0
    while (error > .001) and (i < 20)
        H ← H_new
        W_new ← H_new/Π_Channel
        ΔH_Local ← min(ΔH, 1/3*H)
        i ← i + 1
        H_new ← (ΔH_Local + sqrt(ΔH_Local^2 + 4*Q*Π_Channel*sqrt((1 + f_rect(Q, W_new, H - ΔH_Local, ν, ε, 1)*L_Channel/(4*R_h(W_new, H - ΔH_Local, 1))*(1 - 2*manifold/3))/(2*g*ΔH_Local))))/2
        error ← |H_new - H|/(H_new + H)
    return H_new
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W_HorizChannelΠ(Q, Π_Channel, ΔH, L_Channel, ν, ε, manifold) := H_HorizChannelΠ(Q, Π_Channel, ΔH, L_Channel, ν, ε, manifold)/Π_Channel
# This directly calculates the Width of a channel given a desired aspect ratio.
H_HorizChannelΠMin(Q, Π_Channel, L_Channel, ν, ε, manifold) :=
    ΔH_Large ← 5 m
    H_new ← sqrt(Q/(Π_Channel*sqrt(2*g*ΔH_Large)))
    W_new ← H_new/Π_Channel
    error ← 1
    i ← 0
    while (error > .001) and (i < 20)
        H ← H_new
        W_new ← H_new/Π_Channel
        ΔH_Local ← H/3
        i ← i + 1
        H_new ← (ΔH_Local + sqrt(ΔH_Local^2 + 4*Q*Π_Channel*sqrt((1 + f_rect(Q, W_new, H - ΔH_Local, ν, ε, 1)*L_Channel/(4*R_h(W_new, H - ΔH_Local, 1))*(1 - 2*manifold/3))/(2*g*ΔH_Local))))/2
        error ← |H_new - H|/(H_new + H)
    return H_new
W_HorizChannelΠMin(Q, Π_Channel, L_Channel, ν, ε, manifold) := H_HorizChannelΠMin(Q, Π_Channel, L_Channel, ν, ε, manifold)/Π_Channel
## Weir Head Loss
# H (or head loss in the equation below) is the difference in height between the water upstream of the weir and the top of the weir.
W_rectweir(Q, H) := 3/2*Q/(Pi_VenaContractaOrifice*sqrt(2*g)*H^(3/2))
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Headloss_weir(Q, W) := (3/2*Q/(Pi_VenaContractaOrifice*sqrt(2*g)*W))^(2/3)
Q_RectWeir(H, W) := 2/3*Pi_VenaContractaOrifice*sqrt(2*g)*H^(3/2)*W
## Energy Dissipation Control Equations
# These equations are to control floc break up.
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D_PipeED(ED, Q, Pi_VenaContractaOrifice, Pi_Jet) := (Pi_Jet*4*Q/(π*ED^(1/3)))^(3/7)*1/sqrt(Pi_VenaContractaOrifice)
ND_PipeED(ED, Q, Pi_VenaContractaOrifice, Pi_Jet, PipeSpecification) := NominalDiameter(D_PipeED(ED, Q, Pi_VenaContractaOrifice, Pi_Jet), PipeSpecification)
Q_PipeED(ED, D, Pi_VenaContractaOrifice, Pi_Jet) := π*D^(7/3)*ED^(1/3)*Pi_VenaContractaOrifice^(7/6)/(4*Pi_Jet)
# This function is the same as the one below called Q.PipeMaxED.
# Maximum flow through manifold pipe
V_PipeMaxED(ED, A, Pi_VenaContractaOrifice, Pi_Jet) :=
    for i ∈ 0 .. last(A)
        V[i] ← Pi_VenaContractaOrifice/Pi_Jet*(2*ED*sqrt(A[i]*Pi_VenaContractaOrifice)/π)^(1/3)
    return V
findindexQ(Q, Q_array) :=
    i ← 0
    while Q_array[i] < Q
        i ← i + 1
    return i
# This function gives us an index in an array of the pipe size that insures a flow rate greater than  flow rate Q
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ED_Port(Q_Port, D_Port, Pi_VenaContractaOrifice, Pi_Jet) := (Q_Port/(D_Port^(7/3)*Pi_VenaContractaOrifice^(7/6))*4*Pi_Jet/π)^3
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# This function gives us the energy dissipation rate in the inlet channel following the expansion through the entrance port.
ED_Channel(V_Channel, H_Channel, Pi_VenaContractaOrifice, Pi_Jet) := (Pi_Jet*V_Channel/Pi_VenaContractaOrifice)^3/(H_Channel*Pi_VenaContractaOrifice)
V_Channel(ED_Channel, H_Channel, Pi_VenaContractaOrifice, Pi_Jet) := Pi_VenaContractaOrifice/Pi_Jet*(ED_Channel*Pi_VenaContractaOrifice*H_Channel)^(1/3)
# This function gives us the average velocity in the inlet channel before any water has exited through an inlet manifold pipe.
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# This function gives us the area of the inlet channel given the flow rate and the energy dissipation rate.
A_Channel(Q_Plant, ED_Channel, Pi_VenaContractaOrifice, Pi_Jet) := (Pi_Jet*Q_Plant/(Pi_VenaContractaOrifice^(4/3)*ED_Channel^(1/3)))^(6/7)
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H_Channel(Q_Plant, W_Channel, ED_Channel, Pi_VenaContractaOrifice, Pi_Jet) := (Pi_Jet*Q_Plant/W_Channel)^(3/4)/(Pi_VenaContractaOrifice*ED_Channel^(1/4))
# This function gives us the height of the inlet channel once the width is known.
W_Channel(Q_Plant, H_Channel, ED_Channel, Pi_VenaContractaOrifice, Pi_Jet) := Pi_Jet*Q_Plant/(H_Channel*Pi_VenaContractaOrifice*ED_Channel^(1/4))^(4/3)
## Manifold Equation
Q_ports(A_Manifold, A_Port, N_Ports, Q_Manifold, L_Manifold, B_Port, Pi_vc, ν, ε_Roughness) :=
    Q_Port ← Q_Manifold/N_Ports
    D_Manifold ← D_circle(A_Manifold)
    V[0] ← Q_Manifold/A_Manifold
    Q_m[0] ← Q_Manifold
    H_m[0] ← 1/(2*g)*(Q_Manifold/(N_Ports*Pi_vc*A_Port))^2
    maxerror ← 0.00001
    error ← 1
    while error > maxerror
        for i ∈ 0 .. N_Ports - 1
            Q_p[i] ← Pi_vc*A_Port*sqrt(2*g*H_m[i])
            V[i + 1] ← max(V[i] - Q_p[i]/A_Manifold, 0.0000001*m/s)
            Q_m[i + 1] ← A_Manifold*V[i + 1]
            ΔH_Exp ← (V[i] - V[i + 1])*V[i + 1]/g
            H_m[i + 1] ← max(H_m[i] + ΔH_Exp - h_f(Q_m[i + 1], D_Manifold, B_Port, ν, ε_Roughness), 0.0000001 mm)
        error ← ((Q_Manifold/sum(Q_p))^2 - 1)^2
        H_m[0] ← H_m[0]*(1 + 0.001*((Q_Manifold - sum(Q_p))/Q_Manifold))
    return Q_p
## Sizing a pipe to be used as a channel
# This is the requirement that there must be sufficient head available to accelerate the flow to the critical velocity
Q_Max(D, θ) := ((D/2)^2*(θ - sin(θ)*cos(θ)))*sqrt(D/2*(1 + cos(θ))*2*g)
# Set the two equations for Q equal and simplify. The result is
f(θ) := (θ - sin(θ)*cos(θ))/(4*sin(θ)*(1 + cos(θ))) - 1
# Use the root find function to get the value of θ. Note that θ is independent of the pipe diameter.
θguess := 3 rad
θ := root(f(θguess), θguess) = 1.95761  # This is the angle in radians corresponding to the maximum critical depth
# Now solve the max flow equation for the Diameter given θ.
D_PipeChannel(Q, EN_PipeSpec) :=
    D ← 2*(Q/((θ - sin(θ)*cos(θ))*sqrt((1 + cos(θ))*2*g)))^(2/5)
    D ← NominalDiameter(D, EN_PipeSpec)
    return D
# This was added to find the pipe size needed for the low flow plant drain pipe
D_PipeOpenFlow(Q, h_e, L, n, EN_PipeSpec) :=
    D ← (n*Q/(h_e/L)^(1/2)*2^(13/3)/π)^(3/8)*(s^(3/8)/m^(1/8))
    D ← NominalDiameter(D, EN_PipeSpec)
    return D
# Carman Kozeny Sand Bed Head Loss
h_lKozeny(L, D, V, ε, ν) := k_Kozeny*L*ν/g*(1 - ε)^2/ε^3*36/D^2*V  # Consistent with CEE 4540
# Rectangular Duct Functions
# Derivation:
R_h == w*h/(2*(w + h))
D_h == 4*R_h
W_SquareDuct(Q, h_f, L, ν, ε) :=
    width ← (32*ν*L*Q/(g*h_f))^(1/4)
    while h_frect(Q, width, width, L, ν, ε, 0) > h_f
        width ← width + 1 cm
    return width
h_f == f*L/(4*R_h)*V^2/(2*g)
f == 64/(V*D_h/ν)  # This assumes laminar flow; however, most flows within ducts will end up being turbulent. The actual function safeguards against this.
h_f == 64/(V*4*R_h/ν)*L/(4*R_h)*V^2/(2*g)
R_h^2 == 2*L*Q/A*ν/(g*h_f)
(w*h/(2*(w + h)))^2 == 2*L*Q/(w*h)*ν/(g*h_f)
(w*h)^3/(4*(w + h)^2) == 2*L*Q*ν/(g*h_f)
# if duct is square...
w^6/(4*4*w^2) == 2*L*Q*ν/(g*h_f)
w == (32*L*Q*ν/(g*h_f))^(1/4)
# Component Wise Head Loss Calculations
# Sedimentation Tank
Q_SedManifoldMax := Q_PipeED(ED_SedInlet, innerdiameter(ND_SedManifoldMax, PS_Default), Pi_VenaContractaOrifice, Pi_JetRound)
Q_SedManifoldMin := Q_PipeED(ED_SedInlet, innerdiameter(ND_SedManifoldMin, PS_Default), Pi_VenaContractaOrifice, Pi_JetRound)
N_SedTanks := max(min(ceil(Q_Plant/Q_SedManifoldMin), N_SedTanksMin), ceil(Q_Plant/(2*Q_SedManifoldMax))) = 3
Q_Sed := Q_Plant/N_SedTanks = 0.00666667 m^3/s
L_SedUpflowMax := Q_SedManifoldMax/(V_SedUpBod*W_SedBay) = 7.91255 m
# There is a minimum number of total sed bays required to maintain the desired upflow velocity in each sed tank given the maximum length calculated above.
N_SedBaysTotal := ceil(Q_Plant/(V_SedUpBod*W_SedBay*L_SedUpflowMax)) = 3
N_SedBaysMin := ceil(N_SedBaysTotal/N_SedTanks) = 1  # Minimum number of sed bays per sed tank given the minimum total number calculated above.
fN_SedBays(Q_Plant) := min(ceil(Q_Plant/(N_SedTanksMin*Q_SedManifoldMax)), 2)
N_SedBaysEst := fN_SedBays(Q_Plant) = 1
N_SedBays := max(N_SedBaysMin, N_SedBaysEst) = 1
Q_SedBay := Q_Sed/N_SedBays = 0.00666667 m^3/s  # The number of bays per tank is the maximum of the calculated value and the user input
L_SedUpflowEst := Q_SedBay/(W_SedBay*V_SedUpBod) = 6.24922 m
W_Sed := N_SedBays*W_SedBay = 1.0668 m
ND_SedLaunder := ND_Manifold(Q_SedBay, HL_SedLaunderBod, L_SedUpflowEst, Pi_QLaunderOrifices, PS_Default, Nu_Water, E_Pvc, K_PipeExit, 2*floor(L_SedUpflowEst/B_SedLaunderOrificesEst)) = 0.1524 m
ND_SedManifold := NominalDiameter(D_PipeED(ED_SedInlet, Q_SedBay, Pi_VenaContractaOrifice, Pi_JetRound), PS_Default) = 0.2032 m
D_PipeED(ED_SedInlet, Q_SedBay, Pi_VenaContractaOrifice, Pi_JetRound) = 0.18184 m
# Inlet Channel
L_SedChannel := N_SedTanks*W_Sed + (N_SedTanks - 1)*T_SedWallDivider + T_PlantWall - T_SedWallDivider = 3.5004 m
# Length of the inlet channel, which runs along the entire width of the sed tanks.
W_SedInletChannelPlumbing := 2*ConRadius(ND_SedManifold) + 2*S_Fitting = 0.336537 m  # The minimum width requirements for the plumbing
# The area of the inlet channel must be large enough not to break up flocs
A_SedInletChannelED := A_Channel(Q_Plant, ED_SedInlet, Pi_VenaContractaOrifice, Pi_JetPlane) = 0.0449678 m^2
HL_SedWeirExit := Headloss_weir(Q_Plant, L_SedChannel) = 2.11312 cm
HW_SedInletChannelPlumbing := HL_SedLaunderBod + 2*ConRadius(ND_SedLaunder) + S_Fitting + HL_SedWeirExit = 0.295281 m
# The minimum water depth requirements for the plumbing. The controlling head loss in the sedimentation tank will be the head loss in the exit  launder and the exit weir.
W_SedInletChannelPreWeir :=
    W ← W_SedInletChannelPlumbing
    HW ← HW_SedInletChannelPlumbing
    while W*HW < A_SedInletChannelED
        HW ← HW + 1 mm if HW < W
        W ← W + 1 mm otherwise
    return W
    = 0.336537 m
EN_InletChannelGeom :=
    hl_weir ← Headloss_weir(Q_Plant, W_SedInletChannelPreWeir)
    Geom_Channel ← Perpendicular_Weir if (hl_weir ≤ HL_SedWeirMax)
    Geom_Channel ← Parallel_Weir otherwise
    return Geom_Channel
    = 1
# This function determines the geometry of the weir based on the headloss through it. Hl.SedWeirMax is an expert input. 0-->Perpendicular, 1--> Parallel
W_SedWeirInlet :=
    W_SedInletChannelPreWeir if EN_InletChannelGeom == Perpendicular_Weir
    L_SedChannel otherwise
    = 3.5004 m
# CEE 4540, we analyzed a square inlet channel to find the width and then find H.channel. The philosophy of design in the code is different since we are considering the width of plumbing as the basis of setting the width of the channel. Here, we are trying to minimize the materials requirements by using the A.channel and minimum requirements by the plumbing rather than using a square channel as a constraint.
HL_SedWeirInlet := Headloss_weir(Q_Plant, W_SedWeirInlet) = 0.0211312 m
HW_SedInletChannel :=
    W ← W_SedInletChannelPlumbing
    HW ← HW_SedInletChannelPlumbing
    while W*HW < A_SedInletChannelED
        HW ← HW + 1 mm if HW < W
        W ← W + 1 mm otherwise
    return HW
    = 0.295281 m
W_Channel1 := A_SedInletChannelED^(1/2) = 0.212056 m
H_Channel1 := H_Channel(Q_Plant, W_Channel1, ED_SedInlet, Pi_VenaContractaOrifice, Pi_JetPlane) = 0.212056 m
H_SedInletChannel := HW_SedInletChannel + H_PlantFreeboard = 0.395281 m
H_ChannelActual := H_Channel1 + H_PlantFreeboard = 0.312056 m
H_SedWeirInlet := HW_SedInletChannel - HL_SedWeirInlet = 0.27415 m
W_SedInletChannelPostWeir := max(W_ChannelMin, W_HorizChannel(Q_Plant, H_SedWeirInlet, HL_ChannelMax, L_SedChannel, Nu_Water, E_Concrete, 1)) = 0.15 m
W_SedInletChannel :=
    W_SedInletChannelPreWeir if EN_InletChannelGeom == Perpendicular_Weir
    W_SedInletChannelPreWeir + T_SedWeir + W_SedInletChannelPostWeir if EN_InletChannelGeom == Parallel_Weir
    = 0.526537 m
V_SedInletChannel := Q_Plant/(W_SedInletChannelPreWeir*HW_SedInletChannel) = 0.201261 m/s
# This is the velocity in the part of the channel that delivers the flocs
R_h(W_SedInletChannel, HW_SedInletChannel, 1) = 0.139179 m
# Calculating the head loss that is incurred by the flow in the inlet channel by virtue of expansion and transversing throughout the length upto the last inlet. This would be the maximum head loss that the flow can incur based on the major and minor losses. The head loss is calculated for a rectangular channel. This head loss was not originally accounted for in the design code.
HL_SedInletChannelMax := h_erect(Q_Plant, W_SedInletChannel, HW_SedInletChannel, K_Exp) + h_frect(Q_Plant, W_SedInletChannel, HW_SedInletChannel, L_SedChannel, Nu_Water, E_Concrete, 1) = 0.000999751 m
# Outlet Pipe to Filters
L_FiEntrancePipeEst := W_DCWalkway + W_SedInletChannel + 1 m = 2.52654 m
# The extra 1 meter is for the vertical section where the pipe drops down from the sed tank exit channel.
# Previously the size of the filter entrance pipe was calculated based solely on Q.Plant and would not calculate for higher flow rates; now the min function with the Q.PipeTotal calculation avoid that failure.
ND_FiEntrancePipeMax := FloorNearest(Pipesizes[index(FloorNearest(W_SedBay/2 - ConRadius(ND_SedManifold) - 2*S_Fitting, Pipesizes[:, 1]), Pipesizes[:, 1]), 0], AvailND) = 8 in
ND_FiEntrancePipe := min(D_pipeschedule(min(Q_Plant, Q_pipetotal(innerdiameter(AvailND[last(AvailND)], PS_Default), HL_FiEntrancePipeMax, L_FiEntrancePipeEst, Nu_Water, E_Pvc, K_FiEntrancePipe)), PS_Default, HL_FiEntrancePipeMax, L_FiEntrancePipeEst, Nu_Water, E_Pvc, K_FiEntrancePipe), ND_FiEntrancePipeMax) = 8 in
N_FiEntrancePipes := ceil(Q_Plant/Q_pipetotal(innerdiameter(ND_FiEntrancePipe, PS_Default), HL_FiEntrancePipeMax, L_FiEntrancePipeEst, Nu_Water, E_Pvc, K_FiEntrancePipe)) = 1
Q_FiEntrancePipe := Q_Plant/N_FiEntrancePipes = 20 L/s
HL_FiEntrancePipe := h_l(Q_FiEntrancePipe, innerdiameter(ND_FiEntrancePipe, PS_Default), L_FiEntrancePipeEst, K_FiEntrancePipe, Nu_Water, E_Pvc) = 5.35645 cm
# Exit Channel
HW_SedExitChannel := HW_SedInletChannel - HL_SedLaunderBod = 0.255281 m
# Consistent with CEE 4540 notes but the depth is based on the basis of design head loss and not the actual head loss through the orifice
H_SedWeirExit := HW_SedExitChannel - HL_SedWeirExit = 0.23415 m
# Sludge Drain
H_LamellaToLaunder := T_ConcreteMin + CapThickness(ND_SedLaunder) = 0.0579375 m
L_SedUpflow :=
    i ← 0
    L ← 0 m
    while L < L_SedUpflowEst
        i ← i + 1
        L ← (H_SedWeirExit + T_ChannelWall - outerdiameter(ND_SedLaunder) - H_LamellaToLaunder - T_SedPlate*cos(AN_SedPlate))/tan(AN_SedPlate) + T_SedPlate/sin(AN_SedPlate) + (PlateIndex[i] - 1)*B_SedPlate/sin(AN_SedPlate) - 2*T_ConcreteMin
    return L
    = 6.32183 m
L_SedChannelToWall := L_SedUpflow + 2*T_ConcreteMin = 6.42183 m
N_SedPlates := round((L_SedChannelToWall - (H_SedWeirExit + T_ChannelWall - outerdiameter(ND_SedLaunder) - H_LamellaToLaunder - T_SedPlate*cos(AN_SedPlate))/tan(AN_SedPlate) - T_SedPlate/sin(AN_SedPlate))/(B_SedPlate/sin(AN_SedPlate)) + 1) = 204
V_SedUp := Q_SedBay/(L_SedUpflow*W_SedBay) = 0.000988514 m/s
# The factor of two is because the flow rate decreases linearly as the tank drain (for a constant cross section tank). Thus the average drain rate is 1/2 the initial drain rate.
Q_SedSludgeDrain := (2*W_SedBay*L_SedUpflow*HW_SedEst/Ti_SludgeDrain) = 0.014987 m^3/s
N_SedSludgeOrificesEst := floor(L_SedUpflow/B_SedSludgeOrificesEst) - 1 = 62
W_SedExitChannelPreWeir := max(W_HorizChannel(Q_Plant, HW_SedExitChannel, HL_ChannelMax, L_SedChannel, Nu_Water, E_Concrete, 1), W_ChannelMin, CapHeight(ND_SedLaunder) + 1.05*L_SedLaunderCapExcess) = 0.1585 m
L_SedPlateActive := (N_SedPlates - 1)*S_SedPlate/sin(AN_SedPlate) = 5.86011 m
L_SedPlateEst := (B_SedPlate*Q_SedBay/(W_SedBay*L_SedPlateActive*V_SedCBod) - S_SedPlate)/(sin(AN_SedPlate)*cos(AN_SedPlate)) = 0.496383 m
N_PlatesPerSheet := floor(L_SedPlateSheet/L_SedPlateEst) = 6
L_SedPlate := L_SedPlateSheet/N_PlatesPerSheet = 0.5 m
W_SedExitChannelPostWeir := max(2*ConRadius(ND_FiEntrancePipe)*(N_FiEntrancePipes > 1), W_ChannelMin, W_HorizChannel(Q_Plant, H_SedWeirInlet, HL_ChannelMax, L_SedChannel - W_SedBay/2, Nu_Water, E_Concrete, 1)) = 0.15 m
W_SedExitChannel := W_SedExitChannelPreWeir + T_SedWeir + W_SedExitChannelPostWeir = 0.3485 m
L_SedHopper :=
    (W_SedExitChannel + T_SedWeir + W_SedInletChannel + T_ChannelWall + 2*T_ConcreteMin) if Q_Plant > Q_PlantMaxLF
    L_SedPlate*cos(AN_SedPlate) otherwise
    = 1.16504 m
# This is the required diameter of the sludge drain if it were circular
# To get the effective "diameter" of the sludge drain manifold (the cross section will actually be a polygon) an approximate length for the portion of the sludge drain which runs under the floc hopper is assumed to be 1m and is entered in the manifold function as if its section had inlet holes as well. Since the effect of the additional length on the calculated "diameter" is very small, the accuracy of these assumptions is not very important.
D_SedSludgeChannel := D_Manifold(Q_SedSludgeDrain, HW_SedEst, L_SedUpflow, Pi_QSludgeOrifices, Nu_Water, E_Concrete, 0, N_SedSludgeOrificesEst) = 0.0923192 m
ND_SedSludgePipe := NominalDiameter(D_PipeTotal(Q_SedSludgeDrain, HW_SedEst/3, L_SedUpflow + L_SedHopper, Nu_Water, E_Pvc, K_PipeExit + K_GateValve), PS_Default) = 0.1016 m
HL_SedSludgeEst := (HL_Manifold(Q_SedSludgeDrain, D_SedSludgeChannel, L_SedUpflow + L_SedHopper, 0, Nu_Water, E_Concrete, N_SedSludgeOrificesEst) + h_l(Q_SedSludgeDrain, innerdiameter(ND_SedSludgePipe, PS_Default), L_SedHopper + ValveLength(ND_SedSludgePipe) + 10 cm, K_GateValve + K_PipeExit, Nu_Water, E_Pvc)) = 0.614149 m
# old calculation of HL sedsludgeest
HL_Manifold(Q_SedSludgeDrain, D_SedSludgeChannel, L_SedUpflow + L_SedHopper, 0, Nu_Water, E_Concrete, N_SedSludgeOrificesEst) = 0.357217 m
HL_SedSludgeOrificeEst := HW_SedEst - HL_SedSludgeEst = 1.38585 m
# Inlet Manifold
T_SedDiffuserWall := outerradius(ND_SedDiffuser) - innerdiameter(ND_SedDiffuser, PS_Default)/2 = 0.001778 m
L_SedDiffuserOutlet := 5 cm - 2*T_SedDiffuserWall = 0.046444 m  # based on the mold
B_SedManifoldPort := L_SedDiffuserOutlet + 2*T_SedDiffuserWall = 5 cm
# Subtracting two times the socket depth from the available length allows space for the manifold to be pulled out of its coupling without the diffusers running into the support ledge at the free end.
N_SedManifoldPorts := floor((L_SedUpflow - SocketDepth(ND_SedManifold) - CapThickness(ND_SedManifold))/(L_SedDiffuserOutlet + 2*T_SedDiffuserWall)) = 124
# Subtracting two times the socket depth from the available length allows space for the manifold to be pulled out of its coupling without the diffusers running into the support ledge at the free end.
Q_SedManifoldPort := Q_SedBay/N_SedManifoldPorts = 0.0537634 L/s
D_SedManifoldPort := CeilNearest(D_PipeED(ED_SedInlet, Q_SedManifoldPort, Pi_VenaContractaOrifice, Pi_JetRound), D_Drill) = 2.38125 cm
HL_SedManifoldPort := h_e(Q_SedManifoldPort, D_SedManifoldPort, K_PipeEnt) = 0.00037153 m
# The head loss incurred by virtue of the flow from the inlet manifold into the the ports. This head loss was not originally accounted for in the design code.
# We need enough length to give the jet that is coming out of the manifold port to expand to the size of the rectangular slot
# This is the amount of stretch we can get from the PVC pipe in the transition from round to rectangular. Large stretch factors are not possible to create without tearing the PVC.
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W_SedDiffuserOutlet := ((Pi_JetPlane*W_SedBay*V_SedUpBod)^3/ED_SedInlet)^(1/4) = 0.46336 cm
V_SedManifoldPort := Q_SedManifoldPort/(π*D_SedManifoldPort^2/4)*1/Pi_VenaContractaOrifice = 0.191623 m/s
V_SedDiffuser := Q_SedManifoldPort/(B_SedManifoldPort*W_SedDiffuserOutlet) = 0.232059 m/s
V_SedManifoldPort/V_SedDiffuser = 0.82575
# This is the head loss due to the expansion of the jet through the diffuser and jet reverser. This head loss was not originally accounted for in the design code.
HL_SedDiffuser := h_eGen(V_SedDiffuser, K_Exp) = 0.00274565 m
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L_SedDiffuserRoundjetanalogy := 6.2*V_SedManifoldPort/V_SedDiffuser*D_SedManifoldPort*sqrt(Pi_VenaContractaOrifice) = 0.0967643 m
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L_SedDiffuserPlanejetanalogy := (2.41*V_SedManifoldPort/V_SedDiffuser)^2*D_SedManifoldPort*sqrt(Pi_VenaContractaOrifice) = 0.0748525 m  # plane jet
L_SedManifoldDiffuser := max(L_SedDiffuserPlanejetanalogy, L_SedDiffuserRoundjetanalogy) = 0.0967643 m
# Exit Launder
B_SedLaunderOrifices := B_SedLaunderOrificesEst = 0.1 m
L_SedLaunder :=
    L_SedChannelToWall - CapThickness(ND_SedLaunder) if T_ChannelWall > 2*CouplingLength(ND_SedLaunder)
    L_SedChannelToWall + T_ChannelWall - 2*CouplingLength(ND_SedLaunder) - CapThickness(ND_SedLaunder) if CouplingLength(ND_SedLaunder) < T_ChannelWall < 2*CouplingLength(ND_SedLaunder)
    L_SedChannelToWall + T_ChannelWall - CouplingLength(ND_SedLaunder) - CapThickness(ND_SedLaunder) otherwise
    = 6.40514 m
N_SedLaunderOrifices := floor((L_SedLaunder - CapHeight(ND_SedLaunder) + CapThickness(ND_SedLaunder) - SocketDepth(ND_SedLaunder))/B_SedLaunderOrifices) = 62
# This the HL due to major & minor losses loses through the manifold.
HL_SedLaunderMajor := HL_Manifold(Q_SedBay, innerdiameter(ND_SedLaunder, PS_Default), L_SedLaunder, 0, Nu_Water, E_Pvc, N_SedLaunderOrifices) = 0.00211618 m
HL_SedLaunderOrificeEst := HL_SedLaunderBod - HL_SedLaunderMajor = 0.0378838 m
Q_SedLaunderOrifices := Q_SedBay/N_SedLaunderOrifices = 0.000107527 m^3/s
D_SedLaunderOrifice := RoundNearest(D_circle(A_orifice(HL_SedLaunderOrificeEst, Pi_VenaContractaOrifice, Q_SedLaunderOrifices)), D_Drill) = 1.5875 cm
# This is the total headloss through the launder based on the actual diameter of the orifices
HL_SedLaunderOrifice := h_orifice(D_SedLaunderOrifice, Pi_VenaContractaOrifice, Q_SedLaunderOrifices) = 3.79112 cm
# The cross sectional area of the drain if it were circular
A_SedSludge := π/4*D_SedSludgeChannel^2 = 0.00669381 m^2
W_SedSludge := sqrt(A_SedSludge) = 0.0818157 m
H_SedSludge := (A_SedSludge/W_SedSludge) = 0.0818157 m
W_SedSideSlopes := (W_SedBay - outerradius(ND_SedJetReverser))/2 = 0.511175 m
H_SedSideSlopes := tan(AN_SedSlope)*W_SedSideSlopes = 0.609195 m
Z_SedSideSlopes := Plant_Origin[2] + H_SedSludge + T_ConcreteMin + outerradius(ND_SedJetReverser) + H_SedSideSlopes = 0.78546 m
# Plates
V_SedActiveUp := Q_SedBay/(W_SedBay*L_SedPlateActive) = 1.0664 mm/s
V_SedCaptureCheck := V_SedActiveUp*B_SedPlate/(L_SedPlateEst*sin(AN_SedPlate)*cos(AN_SedPlate) + S_SedPlate) = 0.12 mm/s
HL_SedPlate := 2*Nu_Water/g*(V_SedUp/V_SedCaptureCheck - 1)*(6*V_SedUp/(S_SedPlate*sin(AN_SedPlate)^2*cos(AN_SedPlate))) = 9.3383e-7 m
# The head loss through the sedimentation plates was not originally accounted for in the design code.
Z_SedManifoldPipe := Plant_Origin[2] + H_SedSludge + T_ConcreteMin + outerradius(ND_SedJetReverser) + L_SedManifoldDiffuser + innerdiameter(ND_SedManifold, PS_Default)/2 = 0.373627 m
Z_SedFlocWeir := max(Z_SedManifoldPipe + outerradius(ND_SedManifold) + T_ConcreteMin, Z_SedSideSlopes + H_SedSlopesToFlocWeirMin) = 0.93546 m
Z_SedLamellaBottomMin := Z_SedFlocWeir + H_FlocWeirToLamellaMin = 1.03546 m
Z_SedLaunderMin := Z_SedLamellaBottomMin + (L_SedPlate + T_SedPlate)*sin(AN_SedPlate) + T_ConcreteMin + ConRadius(ND_SedLaunder) = 1.61228 m
Z_SedChannelBottomMin := Z_SedLaunderMin + ConRadius(ND_SedLaunder) - H_SedWeirExit = 1.47021 m
# first determine if you need a coupling or not embedded in the channel, flush with the 45 elbow. If you need a coupling you might need to adjust the depth to accomodate the coupling
H_SedHopperAngleFit := Z_SedChannelBottomMin - Z_SedManifoldPipe + ConRadius(ND_SedManifold) = 1.21485 m
H_SedHopperHeightNoCoupling := W_SedInletChannel + W_SedExitChannel + T_ChannelWall + 3*T_SedWeir - W_SedInletChannelPreWeir + S_Fitting + 2*ConRadius(ND_SedManifold) = 1.09504 m
H_SedChanBottomTo45Est := H_SedHopperAngleFit - H_SedHopperHeightNoCoupling = 0.11981 m
EN_SedChannelCoupling :=
    1 if H_SedChanBottomTo45Est > 0
    0 otherwise
    = 1
Z_SedChannelBottom :=
    Z_SedChannelBottomMin if EN_SedChannelCoupling == 0 or H_SedChanBottomTo45Est ≥ CouplingLength(ND_SedManifold)
    (Z_SedChannelBottomMin + CouplingLength(ND_SedManifold) - H_SedChanBottomTo45Est) otherwise
    = 1.55995 m
Z_SedLaunder :=
    Z_SedChannelBottom + H_SedWeirExit - ConRadius(ND_SedLaunder) if Q_Plant > Q_PlantMaxLF
    Z_SedLaunderMin otherwise
    = 1.70202 m
HW_Sed :=
    Z_SedChannelBottom + HW_SedExitChannel + HL_SedLaunderBod if Q_Plant > Q_PlantMaxLF
    Z_SedLaunder + HL_SedLaunderBod otherwise
    = 1.85523 m
H_Sed :=
    Z_SedChannelBottom + H_SedInletChannel if Q_Plant > Q_PlantMaxLF
    (Z_SedLaunder + ConRadius(ND_SedLaunder) + H_PlantFreeboard) otherwise
    = 1.95523 m
# Inlet Manifold 2
L_Sed := L_SedHopper + L_SedUpflow = 7.48687 m
H_SedChanBottomTo45 := Z_SedChannelBottom - Z_SedManifoldPipe + ConRadius(ND_SedManifold) - H_SedHopperHeightNoCoupling = 0.20955 m
Z_SedManifoldPipe + ElbowRadius(ND_SedManifold)/sqrt(2)  # this is the z of the angled manifold pipe
Z_SedManElbow1 :=
    (Z_SedChannelBottom - SocketDepth(ND_SedManifold)) if EN_SedChannelCoupling == 0
    Z_SedChannelBottom - H_SedChanBottomTo45 - SocketDepth(ND_SedManifold) otherwise
    = 1.2864 m
Z_SedManPipeAngledBottom := Z_SedManifoldPipe + ElbowRadius(ND_SedManifold) - ElbowRadius(ND_SedManifold)/sqrt(2) = 0.462901 m
Z_SedManPipeAngledTop := Z_SedManElbow1 - ElbowRadius(ND_SedManifold)/sqrt(2) = 1.07087 m
X_SedManPipeAngledTop := Plant_Origin[0] - L_Sed + W_SedInletChannelPreWeir - S_Fitting - ElbowRadius(ND_SedManifold)/sqrt(2) + ElbowRadius(ND_SedManifold) - ConRadius(ND_SedManifold)
X_SedManPipeAngledBottom := X_SedManPipeAngledTop + Z_SedManPipeAngledTop - Z_SedManPipeAngledBottom = -6.62136 m
L_SedManifoldPipe :=
    -(X_SedManPipeAngledBottom + ElbowRadius(ND_SedManifold)/sqrt(2)) + Plant_Origin[0] - SocketDepth(ND_SedManifold) if Q_Plant > Q_PlantMaxLF
    -(X_SedManPipeAngledTop + ElbowRadius(ND_SedManifold)/sqrt(2)) + Plant_Origin[0] - SocketDepth(ND_SedManifold) otherwise
    = 6.34183 m
SedManPipe_Origin := [Plant_Origin[0] - CapThickness(ND_SedManifold); Plant_Origin[1] + W_SedBay/2; Z_SedManifoldPipe]
SedManElbow_Origin := SedManPipe_Origin - [L_SedManifoldPipe; 0; 0]
SedManVertCoupling_Origin := [
    Plant_Origin[0] - L_Sed + W_SedInletChannelPreWeir - S_Fitting - ConRadius(ND_SedManifold);
    Plant_Origin[1] + W_SedBay/2;
    Z_SedChannelBottom - SocketDepth(ND_SedManifold)
]
SedManVertPipe_Origin := [0 m; 0 m; -CouplingLength(ND_SedManifold) + 2*SocketDepth(ND_SedManifold)] + SedManVertCoupling_Origin
L_SedManVertPipe := SedManVertPipe_Origin[2] - (SedManElbow_Origin[2] + ElbowRadius(ND_SedManifold))
L_StraightPipe := L_SedManVertPipe
V_SedInletManifold := (ED_SedInlet*D_PipeED(ED_SedInlet, Q_SedBay, Pi_VenaContractaOrifice, Pi_JetRound))^(1/3)*Pi_VenaContractaOrifice^(7/6)/Pi_JetRound
HL_InletManifoldEnt := h_eGen(V_SedInletManifold, K_PipeEnt) = 0.00167997 m
# This headloss is calculated based on the current design with a 90degree elbow and a straight vertical section of pipe.
HL_InletManifoldElbow := h_eGen(V_SedInletManifold, K_El90) = 0.00302394 m
# Stacked Rapid Sand Filter
# Clean Bed Head Loss and Maximum Manifold Velocity
Pi_FiManifoldQ := 0.85  # Ratio of long path flow to short path flow
Pi_FiManifoldHeadLoss := 1 - Pi_FiManifoldQ^2 = 0.2775
# Ratio of pressure recovery in the slotted pipes to the head loss through the clean bed (or through the slots in backwash mode)
H_FiLayerF(ND_Trunk) := max(H_FiLayerMin, Ceil(outerdiameter(ND_Trunk) + S_FiTrunkMin, 1 cm), Ceil(OuterDiameterFittingPVC(ND_Trunk), 1 cm), Ceil(FerncoOuterDiameter(ND_Trunk), 1 cm))
Q_FilterMax :=
    for i ∈ 0 .. last(AvailND)
        H_FiLayer ← H_FiLayerF(AvailND[i])
        HL_FiCleanLayer ← h_lKozeny(H_FiLayer, D_FiSand60, V_FiLayer, ε_FiSand, Nu_Water)
        V_FiTrunkMaxPR ← sqrt(2*g*HL_FiCleanLayer*Pi_FiManifoldHeadLoss)
        Q_FilterMax[i] ← π*innerdiameter(AvailND[i], PS_Default)^2/4*V_FiTrunkMaxPR*N_FiLayer/2
    return Q_FilterMax
# This function returns the maximum flow rate through a filter for each of the available trunk pipe sizes based on the manifold flow distribution constraint.
N_Fi := ceil(Q_Plant/LookupCeil(ND_FiTrunkMax, AvailND, Q_FilterMax)) = 1
# We will have one filter up until the plant flow is the maximum for a 6 inch trunk, after which we will multiply the filter as needed
ND_FiTrunk := LookupCeil(Q_Plant/N_Fi, Q_FilterMax, AvailND) = 6 in
H_FiLayer := H_FiLayerF(ND_FiTrunk) = 20 cm
Q_Fi := Q_Plant/N_Fi = 20 L/s  # The flow will be divided evenly between the N_Fi = 1 filters.
A_FiActive := Q_Fi/(N_FiLayer*V_FiLayer) = 1.81818 m^2  # This is the required area of each of the N_Fi = 1 filters.
Q_FiLayer := Q_Fi/N_FiLayer = 3.33333 L/s  # This is the flow rate through each filter layer
H_FiBottomLayerF(ND_Trunk, ND_BwTrunk) := max(H_FiLayerMin, Ceil(outerradius(ND_Trunk) + outerradius(ND_BwTrunk) + S_FiTrunkMin, 1 cm), Ceil(ConRadius(ND_Trunk) + ConRadius(ND_BwTrunk), 1 cm), Ceil(FerncoOuterDiameter(ND_Trunk)/2 + FerncoOuterDiameter(ND_BwTrunk)/2, 1 cm))
# Filtration manifold maximum velocity
HL_FiCleanLayer := h_lKozeny(H_FiLayer, D_FiSand60, V_FiLayer, ε_FiSand, Nu_Water) = 5.56209 cm
PR_FiManifoldMax := HL_FiCleanLayer*Pi_FiManifoldHeadLoss
V_FiManMaxPR := sqrt(2*g*PR_FiManifoldMax) = 0.550207 m/s
# Backwash manifold maximum velocity
HL_FiBwSlotsEst := 5 cm
PR_FiBwManifoldMax := HL_FiBwSlotsEst*Pi_FiManifoldHeadLoss
V_FiBwManMaxPR := sqrt(2*g*PR_FiBwManifoldMax) = 0.521665 m/s
# Plumbing
HL_FiBoxDrainMax := 1.5 m
ND_FiExitWaste := NominalPipeSize(D_PipeTotal(Q_Fi, HL_FiBoxDrainMax, 1 m, Nu_Water, E_Pvc, K_PipeEnt + K_El90 + K_PipeExit)) = 4 in
ND_FiEntOverflow := NominalPipeSize(D_PipeTotal(1.5*Q_Fi, HL_FiBoxDrainMax, 1 m, Nu_Water, E_Pvc, K_PipeEnt + K_El90 + K_PipeExit)) = 6 in
ND_FiBypass := NominalPipeSize(D_PipeTotal(1.5*Q_Fi, 20 cm, 0.5 m, Nu_Water, E_Pvc, K_PipeEnt + K_El90 + K_PipeExit)) = 8 in
ND_DistPipe := D_pipeschedule(Q_Plant, PS_Default, HL_FiBoxDrainMax, 100 m, Nu_Water, E_Pvc, K_PipeEnt + 3*K_El90 + K_PipeExit) = 6 in
HL_FiExitWaste := h_l(Q_Fi, innerdiameter(ND_FiExitWaste, PS_Default), 1 m, K_PipeEnt + K_El90 + K_PipeExit, Nu_Water, E_Pvc) = 0.708459 m
# Accounting for total head loss in all pipe segments.
HL_FiEntOverflow := h_l(1.5*Q_Fi, innerdiameter(ND_FiEntOverflow, PS_Default), 1 m, K_PipeEnt + K_El90 + K_PipeExit, Nu_Water, E_Pvc) = 0.330149 m
HL_FiBypass := h_l(1.5*Q_Fi, innerdiameter(ND_FiBypass, PS_Default), 0.5 m, K_PipeEnt + K_El90 + K_PipeExit, Nu_Water, E_Pvc) = 0.111161 m
HL_DistPipe := h_l(Q_Plant, innerdiameter(ND_DistPipe, PS_Default), 100 m, K_PipeEnt + 3*K_El90 + K_PipeExit, Nu_Water, E_Pvc) = 1.01555 m
# Entrance and Overflow Weirs
ND_FiBwTrunk := NominalDiameter(CeilNearest(D_circle(Q_Fi/V_FiBwManMaxPR), AvailPipeSizes(PS_Default)[:, 0]), PS_Default) = 10 in
W_FiEntrance := max(3*S_Fitting + ConRadius(ND_FiBwTrunk) + 3*ConRadius(ND_FiTrunk) + 2*(SocketDepth(ND_FiTrunk) + ElbowRadius(ND_FiTrunk)), W_HumanMin, W_rectweir(Q_Fi, 5 cm)) = 1.14744 m
L_FiEntranceWeir := W_FiEntrance = 1.14744 m
HL_FiEntranceWeir := Headloss_weir(Q_Fi, L_FiEntranceWeir) = 4.44477 cm
L_FiOverflowWeir := 2*ConRadius(ND_FiBwTrunk) + 2*ConRadius(ND_FiTrunk) + 3*S_Fitting
HL_FiOverflowWeir := Headloss_weir(Q_Fi, L_FiOverflowWeir) = 6.59971 cm
# Backwash Manifold Design and Slot Area
# We select  B_FiBwManSlot := 3/16*in = 4.7625 mm  for the closest slot spacing, and N_FiBwSlotRows := 1  for best structural integrity of these pipes
# We select  B_FiManSlot := 3/16*in = 4.7625 mm  for the closest slot spacing, and N_FiSlotRows := 2  for best structural integrity of these pipes
Q_FiManBranchMaxPR := V_FiManMaxPR*π*innerdiameter(ND_FiManBranch, PS_FiBranch)^2/4 = 0.306785 L/s
Q_FiManBranchAveMaxPR := Q_FiManBranchMaxPR/(1 + (1 - Pi_FiManifoldQ)/2) = 0.285381 L/s
N_FiManBranchMin := Ceil(Q_FiLayer/Q_FiManBranchAveMaxPR, 2) = 12
# branches are coming out of both sides of the manifold
# Maximum number of manifold branches which allows the filter box width to match the auxiliary box width (only relevant for more than one filter):
# The actual width of the overflow/distribution boxes will be defined once the actual filter width is determined based on the number of manifold branches.
W_FiOverflowMin := OuterDiameterFittingPVC(ND_DistPipe) + 2*S_Fitting = 0.28415 m
W_FiMin := W_FiEntrance + W_FiOverflowMin + T_PlantWall + T_ChannelWall - T_FiWall = 1.48159 m
W_FiActiveMin := W_FiMin - outerdiameter(ND_FiBwTrunk) = 1.20854 m  # For one filter make the dimensions closer to square
N_FiManBranchMaxMult := Floor(2*(Q_FiLayer/(W_FiActiveMin*V_FiLayer*B_FiManifoldBranch) - (outerradius(ND_FiBwManBranch) + L_FiManFerncoCoupling + OuterDiameterFittingPVC(ND_FiSandOutlet))/B_FiManifoldBranch) + 1, 2) = 28
W_FiSingleEst := (outerdiameter(ND_FiTrunk) + sqrt(outerdiameter(ND_FiTrunk)^2 + 4*A_FiActive))/2 = 1.43516 m
L_FiSingleEst := W_FiSingleEst
N_FiManBranchSquare := Round(2*(L_FiSingleEst - OuterDiameterFittingPVC(ND_FiSandOutlet) - L_FiManFerncoCoupling + (B_FiManifoldBranch/2 - outerradius(ND_FiBwManBranch)))/B_FiManifoldBranch, 2) = 28
N_FiManBranch :=
    N_FiManBranchSquare if N_Fi == 1
    N_FiManBranchMaxMult otherwise
    = 28
# This is only the active filtration width (does not include the projected area of the trunk lines, but we assume the space between the branch holders and beyond contributes to active area)
W_FiActive := Q_FiLayer/V_FiLayer*1/((N_FiManBranch - 1)/2*B_FiManifoldBranch + L_FiManFerncoCoupling + OuterDiameterFittingPVC(ND_FiSandOutlet) + outerradius(ND_FiBwManBranch)) = 1.22652 m
W_Fi := W_FiActive + outerdiameter(ND_FiBwTrunk) = 1.49957 m
L_FiBwManBranch := W_Fi/2 - outerradius(ND_FiBwTrunk) - ConRadius(ND_FiBwBranchHolder) - outerradius(ND_FiBwBranchHolder) + 2*L_FiManBranchExt - S_FiManAssembly = 57.8965 cm
L_FiBwManBranchTot := L_FiBwManBranch*N_FiManBranch
Q_FiBwManBranch := Q_Fi/N_FiManBranch = 0.714286 L/s
PR_FiBwManBranch := (Q_FiBwManBranch/(π*innerdiameter(ND_FiBwManBranch, PS_FiBranch)^2/4))^2/(2*g) = 1.50791 cm
HL_FiBwSlot := PR_FiBwManBranch/Pi_FiManifoldHeadLoss = 5.43391 cm
A_FiManSlots := 2*A_orifice(HL_FiBwSlot, Pi_VenaContractaOrifice, Q_Fi) = 0.0615018 m^2
L_FiManSlotBranchTotal := A_FiManSlots/W_FiManSlots
L_FiManBranch := W_Fi/2 - outerradius(ND_FiTrunk) - ConRadius(ND_FiBwBranchHolder) - outerradius(ND_FiBranchHolder) + 2*L_FiManBranchExt - S_FiManAssembly = 63.1353 cm
L_FiManBranchTot := L_FiManBranch*N_FiManBranch
N_FiManSlotsPerRow := floor((L_FiManBranchTot - (2*L_FiManBranchExt + B_FiManSlot)*N_FiManBranch)/B_FiManSlot)
N_FiManSlotsPerTrunk := N_FiManSlotsPerRow*N_FiSlotRows
L_FiManSlotCurvedInner := L_FiManSlotBranchTotal/N_FiManSlotsPerTrunk
C_FiManInner := π*innerdiameter(ND_FiManBranch, PS_FiBranch)
Pi_SlotCirc := L_FiManSlotCurvedInner/C_FiManInner = 0.524334
HL_FiBwSlotCheck :=
    while Pi_SlotCirc > 0.4
        HL_FiBwSlot ← HL_FiBwSlot + 0.05 cm
        A_FiManSlots ← 2*A_orifice(HL_FiBwSlot, Pi_VenaContractaOrifice, Q_Fi)
        L_FiManSlotBranchTotal ← A_FiManSlots/W_FiManSlots
        N_FiManSlotsPerRow ← floor((L_FiManBranchTot - (2*L_FiManBranchExt + B_FiManSlot)*N_FiManBranch)/B_FiManSlot)
        N_FiManSlotsPerTrunk ← N_FiManSlotsPerRow*N_FiSlotRows
        L_FiManSlotCurvedInner ← L_FiManSlotBranchTotal/N_FiManSlotsPerTrunk
        C_FiManInner ← π*innerdiameter(ND_FiManBranch, PS_FiBranch)
        Pi_SlotCirc ← L_FiManSlotCurvedInner/C_FiManInner
    return HL_FiBwSlot
# This check was added based on the feedback received from the LFSRSF team since they ran into an issue with the slot lengths for low flowrates. For low flowrates the design code was computing slot lengths larger than the circumference of the slotted pipe. To mitigate this issue the LFSRSF team incorporated this check, which recalculates yhe
HL_FiBwSlot := HL_FiBwSlotCheck = 0.0938391 m
A_FiBwManSlots := A_orifice(HL_FiBwSlot, Pi_VenaContractaOrifice, Q_Fi) = 0.0234003 m^2
# Drew's Comment:
# The slot areas are based on head loss through the slots of the bottom manifold during backwash. During backwash the sand is fluidized and the slots are the only head loss element common to all paths that helps us with flow distribution along the length of the manifold. So that area is calculated based on an allowable difference between short path flow rate and long path flow rate, the function is defined in one of the first sections of the file. The other slot areas are then based on the backwash slot area so that slot head loss through all paths is equal during forward filtration.
# Check that head loss through the backwash slots is small in filtration mode (we want good flow distribution between layers, so the bottom layer should not have significantly more slot head loss)
HL_FiBwSlotForward := h_orifice(D_circle(A_FiBwManSlots*ε_FiSand), Pi_VenaContractaOrifice, Q_FiLayer) = 1.62915 cm
A_FiBwManBranches := N_FiManBranch*π*innerdiameter(ND_FiBwManBranch, PS_FiBranch)^2/4 = 367.762 cm^2
# Monroe's comment
# If the backwash slot area is 1/2 the slot area of the middle two inlets, then the constraint/check mentioned above isn't needed. This is the currently being followed in the code.
# If the backwash slot area is the same as the middle two inlets, then the difference in head loss between the bottom inlet slots and the middle inlet slots during filtration should be small compared with the total head loss through the filter.
Pi_FiBwManArea := A_FiBwManBranches/A_FiBwManSlots = 1.57161  # This is not used, just a check
# Drew's comment:
# The slot area for the backwash inlet manifold (1 1/2" pipes) is 1/2 that of the middle two manifolds. Likewise, the slot area of the top inlet manifold should be 1/2 that of the middle two as it should also receive half of the flow during forward filtration. This doesn't appear in the design file but it should because it will ultimately go in the design specifications document that the design tool will produce.
# Inner manifolds have double the slot area of the upper and lower manifolds
A_FiManSlots := 2*A_FiBwManSlots = 468.007 cm^2
HL_FiSlot := (2*Q_FiLayer/(Pi_VenaContractaOrifice*A_FiManSlots*ε_FiSand))^2*1/(2*g) = 1.62915 cm
# A conservative estimate of the head loss through the slots of the normal inlet manifold given sand blockage
# Bottom Layer Thickness, Total Sand Depth, and Backwash Head Loss
H_FiBottomLayer := H_FiBottomLayerF(ND_FiTrunk, ND_FiBwTrunk) = 26 cm
HL_FiCleanBottomLayer := h_lKozeny(H_FiBottomLayer, D_FiSand60, V_FiLayer, ε_FiSand, Nu_Water) = 7.23071 cm
H_FiSand := (N_FiLayer - 1)*H_FiLayer + H_FiBottomLayer + outerradius(ND_FiBwManBranch) + outerradius(ND_FiManBranch) = 1.30083 m
HL_FiBwSS := H_FiSand*(Rho_FiSand - Rho_H2O)*(1 - ε_FiSand)/Rho_H2O = 1.28782 m  # Sand bed head loss during steady state backwash.
# The backwash head loss is almost exactly equal  to the sand bed depth. Note that this ignores losses in the plumbing.
HL_FiDirty := 40 cm  # Mickey suggested this value based on lab experience
HL_FiTerminal := HL_FiCleanLayer + HL_FiDirty = 45.5621 cm
HL_FiBwInitiation := HL_FiBwSF + HL_FiBwSS = 1.48782 m
# Plumbing Head Loss
L_Fi := (N_FiManBranch - 1)/2*B_FiManifoldBranch + L_FiManFerncoCoupling + outerradius(ND_FiBwManBranch) + OuterDiameterFittingPVC(ND_FiSandOutlet) = 1.48239 m
HL_FiBwInletManifold := 1/3*h_f(Q_Fi, innerD(ND_FiBwTrunk, PS_Default), L_Fi, Nu_Water, E_Pvc) + h_e(Q_Fi/N_FiManBranch, innerD(ND_FiBwManBranch, PS_FiBranch), K_PipeEnt) + 1/3*h_f(Q_Fi/N_FiManBranch, innerD(ND_FiBwManBranch, PS_FiBranch), W_FiActive, Nu_Water, E_Pvc) + HL_FiBwSlot = 10.6434 cm
HL_FiInletManifold(Q_Layer) := 1/3*h_f(2*Q_Layer, innerD(ND_FiTrunk, PS_Default), L_Fi, Nu_Water, E_Pvc) + h_e(2*Q_Layer/N_FiManBranch, innerD(ND_FiManBranch, PS_FiBranch), K_PipeEnt) + 1/3*h_f(2*Q_Layer/N_FiManBranch, innerD(ND_FiManBranch, PS_FiBranch), L_FiManBranch, Nu_Water, E_Pvc) + HL_FiSlot
HL_FiInletManifoldTop(Q_Layer) := 1/3*h_f(Q_Layer, innerD(ND_FiTrunk, PS_Default), L_Fi, Nu_Water, E_Pvc) + h_e(Q_Layer/N_FiManBranch, innerD(ND_FiManBranch, PS_FiBranch), K_PipeEnt) + 1/3*h_f(Q_Layer/N_FiManBranch, innerD(ND_FiManBranch, PS_FiBranch), L_FiManBranch, Nu_Water, E_Pvc) + HL_FiSlot
HL_FiInletManifoldBottom(Q_Layer) := 1/3*h_f(Q_Layer, innerD(ND_FiBwTrunk, PS_Default), L_Fi, Nu_Water, E_Pvc) + h_e(Q_Layer/N_FiManBranch, innerD(ND_FiBwManBranch, PS_FiBranch), K_PipeEnt) + 1/3*h_f(Q_Layer/N_FiManBranch, innerD(ND_FiBwManBranch, PS_FiBranch), L_FiManBranch, Nu_Water, E_Pvc) + HL_FiSlot
HL_FiOutletManifold(Q_Layer) := 1/3*h_f(2*Q_Layer, innerD(ND_FiTrunk, PS_Default), L_Fi, Nu_Water, E_Pvc) + h_e(2*Q_Layer/N_FiManBranch, innerD(ND_FiManBranch, PS_FiBranch), K_PipeExit) + 1/3*h_f(2*Q_Layer/N_FiManBranch, innerD(ND_FiManBranch, PS_FiBranch), L_FiManBranch, Nu_Water, E_Pvc)
# For the head loss through the outlet manifold:
# Does it make sense to have a pipe exit loss included?
# Also, is it worth coming up with an estimate for head loss through the slots entering the branch?
HL_FiOutletStubs(Q_Layer) := Headloss_weir(Q_Layer, innerdiameter(ND_FiTrunk, PS_Default))
HL_FiInletPlumbing1(Q_Layer) := h_l(Q_Layer, innerD(ND_FiTrunk, PS_Default), 3 m, 3*K_El90 + K_PipeEnt, Nu_Water, E_Pvc) + HL_FiInletManifoldTop(Q_Layer)
HL_FiInletPlumbing2(Q_Layer) := h_l(2*Q_Layer, innerD(ND_FiTrunk, PS_Default), 3 m, 3*K_El90 + K_PipeEnt, Nu_Water, E_Pvc) + HL_FiInletManifold(Q_Layer)
HL_FiInletPlumbing3(Q_Layer) := h_l(2*Q_Layer, innerD(ND_FiTrunk, PS_Default), 3 m, K_El90 + K_PipeEnt, Nu_Water, E_Pvc) + HL_FiInletManifold(Q_Layer)
# These are numbered from the top of the filter bed down. The top and bottom inlets have half the flow rate (only serve the layers below and above, respectively). The bottom inlet has the diameter of the backwash trunk.
HL_FiInletPlumbing4(Q_Layer) := h_l(Q_Layer, innerD(ND_FiBwTrunk, PS_Default), 3 m, K_El90 + K_PipeEnt, Nu_Water, E_Pvc) + HL_FiInletManifoldBottom(Q_Layer)
HL_FiInletPlumbingMax(Q_1, Q_2, Q_3, Q_4) := max(HL_FiInletPlumbing1(Q_1), HL_FiInletPlumbing2(Q_2), HL_FiInletPlumbing3(Q_3), HL_FiInletPlumbing4(Q_4))
HL_FiInletPlumbingMin(Q_1, Q_2, Q_3, Q_4) := min(HL_FiInletPlumbing1(Q_1), HL_FiInletPlumbing2(Q_2), HL_FiInletPlumbing3(Q_3), HL_FiInletPlumbing4(Q_4))
HL_FiInletPlumbingAve(Q_1, Q_2, Q_3, Q_4) := (HL_FiInletPlumbing1(Q_1) + HL_FiInletPlumbing2(Q_2) + HL_FiInletPlumbing3(Q_3) + HL_FiInletPlumbing4(Q_4))/4
HL_FiBwInletPlumbing := h_l(Q_Fi, innerD(ND_FiBwTrunk, PS_Default), 3 m, K_El90 + K_PipeEnt, Nu_Water, E_Pvc) + HL_FiBwInletManifold = 12.016 cm
HL_FiOutletPlumbing1(Q_Layer) := h_l(2*Q_Layer, innerD(ND_FiTrunk, PS_Default), 3 m, K_El90 + K_PipeExit, Nu_Water, E_Pvc) + HL_FiOutletManifold(Q_Layer) + HL_FiOutletStubs(Q_Layer)
HL_FiOutletPlumbing2(Q_Layer) := HL_FiOutletPlumbing1(Q_Layer)
HL_FiOutletPlumbing3(Q_Layer) := h_l(2*Q_Layer, innerD(ND_FiTrunk, PS_Default), 3 m, 2*K_El90 + K_PipeExit, Nu_Water, E_Pvc) + HL_FiOutletManifold(Q_Layer) + HL_FiOutletStubs(Q_Layer)
HL_FiOutletPlumbingMax(Q_1, Q_3) := max(HL_FiOutletPlumbing1(Q_1), HL_FiOutletPlumbing2(Q_1), HL_FiOutletPlumbing3(Q_3))
HL_FiOutletPlumbingMin(Q_1, Q_3) := min(HL_FiOutletPlumbing1(Q_1), HL_FiOutletPlumbing2(Q_1), HL_FiOutletPlumbing3(Q_3))
HL_FiOutletPlumbingAve(Q_1, Q_3) := (HL_FiOutletPlumbing1(Q_1) + HL_FiOutletPlumbing2(Q_1) + HL_FiOutletPlumbing3(Q_3))/3
# Path Head Loss Calculations and Flow Distribution Between Layers
HL_FiCleanLyr(Q) := h_lKozeny(H_FiLayer, D_FiSand60, Q/A_FiActive, ε_FiSand, Nu_Water)
HL_FiCleanBottomLyr(Q) := h_lKozeny(H_FiBottomLayer, D_FiSand60, Q/A_FiActive, ε_FiSand, Nu_Water)
HL_FiPathClean1(Q_Path) := HL_FiInletPlumbing1(Q_Path) + HL_FiCleanLyr(Q_Path) + HL_FiOutletPlumbing1(Q_Path)
HL_FiPathClean2(Q_Path) := HL_FiInletPlumbing2(Q_Path) + HL_FiCleanLyr(Q_Path) + HL_FiOutletPlumbing1(Q_Path)
HL_FiPathClean3(Q_Path) := HL_FiInletPlumbing2(Q_Path) + HL_FiCleanLyr(Q_Path) + HL_FiOutletPlumbing2(Q_Path)
HL_FiPathClean4(Q_Path) := HL_FiInletPlumbing3(Q_Path) + HL_FiCleanLyr(Q_Path) + HL_FiOutletPlumbing2(Q_Path)
HL_FiPathClean5(Q_Path) := HL_FiInletPlumbing3(Q_Path) + HL_FiCleanLyr(Q_Path) + HL_FiOutletPlumbing3(Q_Path)
HL_FiPathClean6(Q_Path) := HL_FiInletPlumbing4(Q_Path) + HL_FiCleanBottomLyr(Q_Path) + HL_FiOutletPlumbing3(Q_Path)
HL_FiPathCleanMax(Q_1, Q_2, Q_3, Q_4, Q_5, Q_6) := max(HL_FiPathClean1(Q_1), HL_FiPathClean2(Q_2), HL_FiPathClean3(Q_3), HL_FiPathClean4(Q_4), HL_FiPathClean5(Q_5), HL_FiPathClean6(Q_6))
HL_FiPathCleanMin(Q_1, Q_2, Q_3, Q_4, Q_5, Q_6) := min(HL_FiPathClean1(Q_1), HL_FiPathClean2(Q_2), HL_FiPathClean3(Q_3), HL_FiPathClean4(Q_4), HL_FiPathClean5(Q_5), HL_FiPathClean6(Q_6))
# In reality the flow will distribute itself such that all paths have the same head loss. We will treat the average of all of the calculated path head losses as the actual complete head loss accross all paths.
HL_FiPathCleanAve(Q_1, Q_2, Q_3, Q_4, Q_5, Q_6) := (HL_FiPathClean1(Q_1) + HL_FiPathClean2(Q_2) + HL_FiPathClean3(Q_3) + HL_FiPathClean4(Q_4) + HL_FiPathClean5(Q_5) + HL_FiPathClean6(Q_6))/6
Pi_QFiLayer(Q_1, Q_2, Q_3, Q_4, Q_5, Q_6) := sqrt(HL_FiPathCleanMin(Q_1, Q_2, Q_3, Q_4, Q_5, Q_6)/HL_FiPathCleanMax(Q_1, Q_2, Q_3, Q_4, Q_5, Q_6))
# This estimate is reasonable as long as the answer is close to 1
# Guess:
Q_2 := Q_FiLayer
Q_3 := Q_FiLayer
Q_4 := Q_FiLayer
Q_5 := Q_FiLayer
Q_6 := Q_FiLayer
Q_1 := Q_FiLayer
Given
HL_FiPathClean1(Q_1) == HL_FiPathClean2(Q_2)
HL_FiPathClean2(Q_2) == HL_FiPathClean3(Q_3)
Q_1 + Q_2 + Q_3 + Q_4 + Q_5 + Q_6 == Q_Fi
HL_FiPathClean3(Q_3) == HL_FiPathClean4(Q_4)
HL_FiPathClean4(Q_4) == HL_FiPathClean5(Q_5)
HL_FiPathClean5(Q_5) == HL_FiPathClean6(Q_6)
HL_FiPath(Q) := Find(Q_1, Q_2, Q_3, Q_4, Q_5, Q_6)
Q_FiLayer = 0.00333333 m^3/s
Q_FiPath := HL_FiPath(Q_Fi) = [3.63202; 3.1898; 3.1898; 3.38472; 3.28215; 3.32151] L/s
Q_FiLayer1 := Q_FiPath[0]
Q_FiLayer2 := Q_FiPath[1]
HL_FiPathClean1(Q_FiPath[0]) = 0.173381 m
Q_FiLayer3 := Q_FiPath[2]
HL_FiPathClean2(Q_FiPath[1]) = 0.173381 m
Q_FiLayer4 := Q_FiPath[3]
HL_FiPathClean3(Q_FiPath[2]) = 0.173381 m
HL_FiCleanPath := HL_FiPathClean1(Q_FiPath[0])
Q_FiLayer5 := Q_FiPath[4]
HL_FiPathClean4(Q_FiPath[3]) = 0.173381 m
Q_FiLayer6 := Q_FiPath[5]
HL_FiPathClean5(Q_FiPath[4]) = 0.173381 m
HL_FiPathClean6(Q_FiPath[5]) = 0.173381 m
Pi_QFiLayer(Q_1, Q_2, Q_3, Q_4, Q_5, Q_6) = 0.93376
# Siphon
K_FiSiphon := 5*K_El90 + K_PipeEnt + K_PipeExit = 6  # Minor loss coefficients for flow through the siphon. The tee is treated as an extra elbow
# Space between the entrance box wall and the baffle
S_FiEntranceBaffle := ((Q_Fi/T_ChannelWall)^2/g)^(1/3)
Q_FiSiphonInitiation := Q_Fi + 2*A_FiActive*(HL_FiBwSF + H_FiForwardNoSuckAir + HL_FiDirty + HL_FiBwInletPlumbing + HL_FiBwSS + HL_FiSiphonMax - H_FiSiphonNoSuckAir)/Ti_FiBwInitiationBod = 64.6057 L/s
S_FiBaffleToBlock := ((Q_Fi/T_ChannelWall)^2/g)^(1/3)
L_FiExit := max(3*S_Fitting + 2*OuterDiameterFittingPVC(ND_FiTrunk), W_HumanMin) = 0.5183 m
L_FiEntrance := L_FiOverflowWeir + S_FiEntranceBaffle + S_FiBaffleToBlock + 2*T_SedWeir + T_ConcreteMin
W_MpWalkway := max(W_MpWalkwayMin, ShortTeeLength(ND_DistPipe) + ConRadius(ND_DistPipe) + S_Fitting + ConRadius(ND_DistPipe) + ElbowRadius(ND_DistPipe) + 2*SocketDepth(ND_DistPipe) + ElbowRadius(ND_DistPipe) - L_FiExit/2 - T_PlantWall) = 1 m
H_FiFluidizedBed := Pi_FiFluidized*H_FiSand = 1.69108 m
L_FiSiphonEst := 2*(HL_FiBwInletPlumbing + HL_FiBwSS + HL_FiSiphonMax) + 2*(H_FiFluidizedBed + H_FiFluidizedBedToSiphon) + L_Fi/2 + T_FiWall + W_MpWalkway + 4*T_PlantWall + L_FiExit + L_FiEntrance + W_ChannelMin + W_DCWalkway/2 = 11.7657 m
HL_FiSiphonMax := 30 cm
HL_FiSiphonInitiationMax := HL_FiBwSF + H_FiForwardNoSuckAir + HL_FiDirty + HL_FiBwInletPlumbing + HL_FiBwSS + HL_FiSiphonMax - H_FiSiphonNoSuckAir = 2.30798 m
ND_FiSiphonSS :=
    i ← 5
    HL_SiphonEst ← 10 m
    while HL_SiphonEst > HL_FiSiphonMax
        i ← i + 1
        ID_Siphon ← innerdiameter(AvailND[i], PS_Default)
        HL_SiphonPipeEst ← h_l(Q_Fi, ID_Siphon, L_FiSiphonEst, K_FiSiphon, Nu_Water, E_Pvc)
        HL_SiphonOutlet ← Headloss_weir(Q_Fi, ID_Siphon)
        HL_SiphonOrifice ← h_orifice(ID_Siphon, Pi_VenaContractaOrifice, Q_Fi)
        HL_SiphonEst ← HL_SiphonPipeEst + HL_SiphonOutlet + HL_SiphonOrifice
    return AvailND[i]
# these two functions must be changed if the available pipes are changed in the pipe database!!!!
ND_FiSiphonInitiation :=
    i ← 5
    HL_SiphonEst ← 10 m
    while HL_SiphonEst > HL_FiSiphonInitiationMax
        i ← i + 1
        ID_Siphon ← innerdiameter(AvailND[i], PS_Default)
        HL_SiphonPipeEst ← h_l(Q_FiSiphonInitiation, ID_Siphon, L_FiSiphonEst, K_FiSiphon, Nu_Water, E_Pvc)
        HL_SiphonOutlet ← Headloss_weir(Q_FiSiphonInitiation, ID_Siphon)
        HL_SiphonOrifice ← h_orifice(ID_Siphon, Pi_VenaContractaOrifice, Q_FiSiphonInitiation)
        HL_SiphonEst ← HL_SiphonPipeEst + HL_SiphonOutlet + HL_SiphonOrifice
    return AvailND[i]
ND_FiSiphon := max(ND_FiSiphonSS, ND_FiSiphonInitiation) = 10 in
HL_FiSiphonPipe := h_l(Q_Fi, innerdiameter(ND_FiSiphon, PS_Default), L_FiSiphonEst, K_FiSiphon, Nu_Water, E_Pvc) = 5.80894 cm
HL_FiSiphonOutlet := Headloss_weir(Q_Fi, innerD(ND_FiSiphon, PS_Default)) = 12.2495 cm
B_FiSiphonManOrificesEst := 10 cm
N_FiSiphonManOrifices := 2*floor((L_Fi - 2*ConRadius(ND_FiSiphon))/(2*B_FiSiphonManOrificesEst)) = 10
D_FiSiphonManOrifices := CeilNearest(innerdiameter(ND_FiSiphon, PS_Default)/sqrt(N_FiSiphonManOrifices), D_Drill) = 0.0508 m
# This keeps the area of the orifices the same as the siphon area.
B_FiSiphonManOrifices := (L_Fi - 2*ConRadius(ND_FiSiphon))/N_FiSiphonManOrifices = 11.8236 cm
HL_FiBwInletPlumbing = 0.12016 m
HL_FiSiphonOrifice := h_orifice(D_FiSiphonManOrifices, Pi_VenaContractaOrifice, Q_Fi/N_FiSiphonManOrifices) = 12.5082 cm
HL_FiBwTotalSS := HL_FiBwInletPlumbing + HL_FiBwSS + HL_FiSiphonOrifice + HL_FiSiphonPipe + HL_FiSiphonOutlet = 1.71365 m
Z_SedWeirExit := Z_SedChannelBottom + H_SedWeirExit = 1.7941 m
ZW_FiInletChannel := Z_SedWeirExit - HL_ChannelMax - HL_FiEntrancePipe = 1.69053 m
Z_FiEntranceWeir := ZW_FiInletChannel - HL_FiEntranceWeir = 1.64608 m
ZW_FiEntranceMax := Z_FiEntranceWeir - H_FiWeirFreefall = 1.61608 m
ZW_FiEntranceTerminal := ZW_FiEntranceMax - HL_FiOverflowWeir = 1.55009 m
ZW_FiEntranceCleanForward := ZW_FiEntranceTerminal - HL_FiDirty = 1.15009 m
# NOTE: The last term here is the height of the bubble of water flowing out of the top of the stubs in the exit box. We likely over-estimated this height with an anology to weir head loss. The exit stubs should first be cut longer and then shortened until the water level in the entrance box during clean forward operation is a reasonable margin (H_FiForwardNoSuckAir = 10 cm) above the entrance pipe stubs.
Z_FiExitStub := ZW_FiEntranceCleanForward - HL_FiCleanPath - HL_FiOutletStubs(max(Q_FiPath)) = 0.92245 m
ZW_FiMax := Z_FiExitStub + HL_FiOutletStubs(max(Q_FiPath)) + HL_FiOutletPlumbingAve(Q_FiLayer1, Q_FiLayer3) + HL_FiTerminal = 151.712 cm
Z_FiEntranceStub := ZW_FiEntranceTerminal - HL_FiDirty - H_FiForwardNoSuckAir = 1.05009 m
Z_FiEntranceBottomMax := Z_FiEntranceStub - HL_FiBwSF - H_FiBwNoSuckAir = 0.650086 m
Z_FiInletChannelBottomMax := Z_SedChannelBottom - max(CouplingLength(ND_FiEntrancePipe), T_PlantWall) - ElbowRadius(ND_FiEntrancePipe) - ConRadius(ND_FiEntrancePipe) - S_Fitting - SocketDepth(ND_FiEntrancePipe) = 0.813327 m
Z_FiInletChannelBottom :=
    min(Z_FiInletChannelBottomMax, Z_FiEntranceBottomMax) if Mod == 0
    Z_FiEntranceBottomMax otherwise
Z_FiEntranceBottom :=
    Z_FiEntranceBottomMax if Z_FiInletChannelBottom - Z_FiEntranceBottomMax ≥ 10 cm
    Z_FiInletChannelBottom otherwise
ZW_FiEntranceBwSS := Z_FiEntranceBottom + H_FiBwNoSuckAir = 0.850086 m
# The top of the pipe stub on the siphon where it discharges into the drain channel. Like the stubs in the exit box, the stubs here should be longer than designed for at first and cut shorter until the water level in the entrance box during backwash is approximately H_FiBwNoSuckAir = 20 cm
Z_FiSiphonOutlet := ZW_FiEntranceBwSS - HL_FiBwTotalSS = -0.863563 m
ZW_FiBwSS := Z_FiSiphonOutlet + HL_FiSiphonOrifice + HL_FiSiphonPipe + HL_FiSiphonOutlet = -0.557896 m
# This is the center line of the pipe through the wall.  This is a maximum based on zero flow and the goal of wanting to be able to initiate backwash at the beginning of filtration. This constraint could be relaxed if needed.
Z_FiSiphonCouplingMax := Z_FiExitStub - outerradius(ND_FiSiphon) = 0.785925 m
# The following is the minimum elevation of the top of the siphon where it goes through the filter wall so that it will not overflow when the air is compressed in forward filtration mode. See Monroe's filtration notes for a derivation of the following in terms of simple variables. This expression was derived for the variables defined here.
L_FiSiphonTop := L_Fi/2 - ElbowRadius(ND_FiSiphon) + ShortTeeLength(ND_FiBwManBranch) + SocketDepth(ND_FiSiphon) + T_FiWall + outerradius(ND_FiSiphon) = 0.873871 m
Z_FiSiphonCouplingMin := (P_Atm*(ZW_FiMax + ZW_FiBwSS) + Rho_H2O*g*(ZW_FiMax^2 + ZW_FiMax*L_FiSiphonTop - ZW_FiMax*Z_FiSiphonOutlet))/(2*P_Atm + Rho_H2O*g*(L_FiSiphonTop + ZW_FiMax - Z_FiSiphonOutlet)) + outerradius(ND_FiSiphon) = 0.757303 m
Z_FiSiphonCouplingMax - Z_FiSiphonCouplingMin = 2.86211 cm
# Not much room to spare here! We need to always check this and somehow report an error if this is negative!!!!
# This is still  negative, can we check with Drew?
W_SedExitChannel = 0.3485 m
Z_FiSiphonCoupling := Z_FiSiphonCouplingMax = 0.785925 m
S_Fitting + ConRadius(ND_FiEntrancePipe) + T_SedWeir + W_ChannelMin = 0.358269 m
HL_FiSiphonValveWater := (Z_FiSiphonCoupling - ND_FiSiphon/2) - (Z_FiSiphonOutlet + HL_FiSiphonPipe + HL_FiSiphonOutlet) = 1.3419 m
# The available head is equal to the difference between the bottom of the siphon pipe and the steady state water level in the filter.  This is a head available in terms of water.
HL_FiSiphonValveAir := HL_FiSiphonValveWater*Rho_H2O/Rho_Air = 1114.54 m
# Sand Removal Pipe
Rho_FiFluidized := Rho_H2O*ε_FiSand*Pi_FiFluidized + Rho_FiSand*(1 - ε_FiSand)/Pi_FiFluidized = 1743.08 kg/m^3
Z_FiSiphonOutlet = -0.863563 m
Z_FiSiphonInlet := Z_FiSiphonOutlet - H_FiSiphonNoSuckAir = -0.963563 m
Z_FiBottom := Z_FiSiphonInlet - H_FiFluidizedBed - H_FiFluidizedBedToSiphon = -2.85464 m
H_FiSandOutlet := 1 m
Z_FiSandOutlet := Z_FiBottom + H_FiSandOutlet = -1.85464 m
HL_FiSandOutlet := Z_FiSiphonOutlet - Z_FiSandOutlet = 0.99108 m
# Calculating head loss and density for this problem is a bit complicated. The sand bed has a density of
Rho_FiFluidized = 1743.08 kg/m^3
# This ends up changing Nu.Water, but that doesn't change the results because we are in the very turbulent domain of the Moody diagram. The available head has to take into account the different densities of the fluidized bed and the water above the bed. As the fluidized bed is drained the available head will decrease. Would it be possible to drain the sand out of the bed at the very beginning of the backwash cycle while the water depth above the bed is gradually decreasing? This extra bed depth would provide more head to push the sand through the sand outlet.
# At the beginning of sand pumping the filter box has fluidized sand (and thus a high fluid density) and thus the pressure at the entrance to the sand dump is high. At the end of the sand dump the filter is filled with water and thus the pressure at the entrance to the sand dump is much lower and yet the sand dump pipe is still filled with the high density fluidized sand.
HL_FiSandOutletStart := ((Z_FiSiphonOutlet - Z_FiBottom - H_FiSand*Pi_FiFluidized)*Rho_H2O + H_FiSand*Pi_FiFluidized*Rho_FiFluidized + (-H_FiSandOutlet*Rho_FiFluidized))/Rho_FiFluidized = 0.863189 m
HL_FiSandOutletFinish := ((Z_FiSiphonOutlet - Z_FiBottom)*Rho_H2O + (-H_FiSandOutlet*Rho_FiFluidized))/Rho_FiFluidized = 0.142279 m
# Head loss calculations and valve sizes
V_FiTrunkFlush := 0.3*m/s
Q_FiBwTrunkFlush := π*innerdiameter(ND_FiBwTrunk, PS_Default)^2/4*V_FiTrunkFlush = 14.8206 L/s
Q_FiTrunkFlush := π*innerdiameter(ND_FiTrunk, PS_Default)^2/4*V_FiTrunkFlush = 5.62489 L/s
H_FiSandActive := H_FiSand - outerradius(ND_FiBwManBranch) - outerradius(ND_FiManBranch) = 1.26 m
HL_FiSandBedBwTrunkFlush := h_lKozeny(H_FiSandActive, D_FiSand60, Q_FiBwTrunkFlush/A_FiActive, ε_FiSand, Nu_Water) = 1.55799 m
HL_FiBwSlotsTrunkFlush := h_orifice(D_circle(A_FiBwManSlots*ε_FiSand), Pi_VenaContractaOrifice, Q_FiBwTrunkFlush) = 0.322057 m
HL_FiSlotsTrunkFlush := h_orifice(D_circle(A_FiManSlots*ε_FiSand), Pi_VenaContractaOrifice, Q_FiTrunkFlush) = 0.0115977 m
HL_FiElbowTrunkFlush := h_e(Q_FiTrunkFlush, innerdiameter(ND_FiTrunk, PS_Default), K_El90) = 0.412985 cm
HL_FiSandBedTrunk2Flush := h_lKozeny(H_FiSandActive - 2*H_FiLayer, D_FiSand60, Q_FiTrunkFlush/A_FiActive, ε_FiSand, Nu_Water) = 0.403591 m
HL_FiSandBedTrunk3Flush := h_lKozeny(H_FiSandActive - 4*H_FiLayer, D_FiSand60, Q_FiTrunkFlush/A_FiActive, ε_FiSand, Nu_Water) = 0.215874 m
# Inlet Channel
HW_FiInletChannel := ZW_FiInletChannel - Z_FiInletChannelBottom = 1.04044 m
Pi_QFi := 0.97
HL_FiInletChannel := Headloss_weir(Q_Fi, L_FiEntranceWeir) - Headloss_weir(Q_Fi*Pi_QFi, L_FiEntranceWeir) = 0.0893459 cm
# Slotted Pipe Design
# The slots should be configured to provide this total amount of slot area for the
# bottom manifold handling the backwash flow. We will define this as the inner diameter area of the slots
A_FiBwBranchSlots := A_FiBwManSlots/N_FiManBranch = 8.35727 cm^2
A_FiBranchSlots := A_FiManSlots/N_FiManBranch = 16.7145 cm^2  # This is the amount of slot area that must be available for each length of pipe.
L_FiManSlotBranchTotal := A_FiBranchSlots/W_FiManSlots = 8.22566 m
L_FiBwManSlotBranchTotal := A_FiBwBranchSlots/W_FiManSlots = 4.11283 m  # The slots on each pipe must have this total length to provide the required area.
N_FiBwManSlotsPerRow := floor((L_FiBwManBranch - 2*L_FiManBranchExt - B_FiBwManSlot)/B_FiBwManSlot) = 112
N_FiManSlotsPerRow := floor((L_FiManBranch - 2*L_FiManBranchExt - B_FiManSlot)/B_FiManSlot) = 123
N_FiManSlotsPerBranch := N_FiManSlotsPerRow*N_FiSlotRows = 246
N_FiBwManSlotsPerBranch := N_FiBwManSlotsPerRow*N_FiBwSlotRows = 112
C_FiBwManInner := π*innerdiameter(ND_FiBwManBranch, PS_FiBranch) = 5.05796 in
L_FiBwManSlotCurvedInner := L_FiBwManSlotBranchTotal/N_FiBwManSlotsPerBranch = 1.44574 in
C_FiManInner := π*innerdiameter(ND_FiManBranch, PS_FiBranch) = 3.29553 in
L_FiManSlotCurvedInner := L_FiManSlotBranchTotal/N_FiManSlotsPerBranch = 1.31644 in
C_FiBwManOuter := π*outerdiameter(ND_FiBwManBranch) = 5.96903 in
C_FiManOuter := π*outerdiameter(ND_FiManBranch) = 4.13119 in
L_FiBwManSlotInner := 2*innerdiameter(ND_FiBwManBranch, PS_FiBranch)/2*sin(2*π*L_FiBwManSlotCurvedInner/C_FiBwManInner/2) = 3.19818 cm
Pi_FiBwSlotC := L_FiBwManSlotCurvedInner/C_FiBwManInner = 0.285833
Pi_FiSlotC := L_FiManSlotCurvedInner/C_FiManInner = 0.399463
L_FiManSlotInner := 2*innerdiameter(ND_FiManBranch, PS_FiBranch)/2*sin(2*π*L_FiManSlotCurvedInner/C_FiManInner/2) = 2.53266 cm
# Flocculate
# Vertical
# Generic
# Ρ
# S
# J
# Vertical
# Width
# Space
# Height
# Horizontal
# Height
# Space
# Width
J(P, S) := P*S
S_FlocBaffleMin := W_HumanMin = 0.45 m
J_Min := J(Pi_JSOptimal, S_FlocBaffleMin) = 1.35 m
Pi_VCBaffle := 1/(sqrt(K_FlocBaffle) + 1) = 0.387426
CFD_Constant := 2
Pi_JSOptimal = 3
ED_Floc = 10 mW/kg
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α_ε(Pi_JSOptimal) := max(2, Pi_JetPlane^3/Pi_VenaContractaOrifice^4*2/K_FlocBaffle*Pi_JSOptimal)
# Changed the jet max energy dissipation rate coefficient from 0.34 to 0.38 to better match CFD results. This needs further verification by PIV, literature on plane jets, or CFD.
α_ε(Pi_JSOptimal) = 2
H_MaxHorizontal(Q, S, Pi_JS, ED, J) := Q/(S*(J*2*ED/(K_FlocBaffle*α_ε(Pi_JS)))^(1/3))
Q_MinHorizontal(P, S, Pi_JS, ED, J) := P*S*(J*2*ED/(K_FlocBaffle*α_ε(Pi_JS)))^(1/3)
HW_FlocEndEst :=
    HW_Sed if H_FlocOption == 0
    H_MaxHorizontal(Q_Plant, S_FlocBaffleMin, Pi_JSOptimal, ED_Floc, J_Min) if H_FlocOption == -1
    H_FlocOption*m if H_FlocOption > 0
    = 1.85523 m
# This gives the number of spaces per channel for a horizontal flocculator. Floor to ensure minimum spacing constraint met for horizontal. Subtracting 1 forces it to be odd. Add one before flooring though to get more accurate estimate.
N_FlocSpacesFH(L, T, S) := (Floor((L + T)/(S + T) + 1, 2) - 1)
# This calculates the spacing between baffles given a number of spaces in a channel.
SofN_FlocBaffleF(L, T, N_Spaces) := (L + T)/N_Spaces - T
S_FlocBaffleNonIterative(Q, P, Pi_JS, ED) := (Q/P)^(3/4)*(1/Pi_JS)^(1/4)*(K_FlocBaffle*α_ε(Pi_JS)/(2*ED))^(1/4)
# This equation can be used to find the space between baffles when everything else is known.
S_FlocBaffleCalcH := SofN_FlocBaffleF(L_Sed, T_FlocBaffleRigidH, N_FlocSpacesFH(L_Sed, T_FlocBaffleRigidH, S_FlocBaffleNonIterative(Q_Plant, HW_FlocEndEst, Pi_JSOptimal, ED_Floc))) = 0.11334 m
HW_FlocEnd :=
    H_MaxHorizontal(Q_Plant, S_FlocBaffleCalcH, Pi_JSOptimal, ED_Floc, J(Pi_JSOptimal, S_FlocBaffleCalcH)) if H_FlocOption == -1
    HW_FlocEndEst otherwise
    = 1.85523 m
Q_MinHorizontal(HW_FlocEnd, S_FlocBaffleMin, Pi_JSOptimal, ED_Floc, J_Min) = 146.467 L/s
EN_FlocHoriz :=
    EN_FlocHoriz ← 1 if Q_Plant ≥ Q_MinHorizontal(HW_FlocEnd, S_FlocBaffleMin, Pi_JSOptimal, ED_Floc, J_Min) and H_FlocOption > -1
    EN_FlocHoriz ← 1 if H_FlocOption == -1
    EN_FlocHoriz ← 0 otherwise
T_FlocBaffle :=
    T_FlocBaffleRigidH if EN_FlocHoriz == 1
    T_SedPlate otherwise
T_FlocBaffleRigidV if (EN_FlocHoriz == 0) and (W_FlocChannelMinRigidBaffleV > W_FlocChannelPlasticBaffleV)
S_BaffleOverlapMax := (-2*ConRadius(ND_FlocModulesLarge) + HW_FlocEnd)/(2*Pi_FlocBaffleMin)
# Really need to know the flocculator height to know the needed overlap, so just adding H.PlantFreeboard and hope it works...
W_FlocChannelMin := max(W_HumanMin, (K_FlocBaffle/(ED_Floc*HW_FlocEnd))^(1/3)*Q_Plant/S_BaffleOverlapMax)
W_FlocChannelMax := W_SedPlate
Cost_UnitWall := 950/19*USD/m^2 = 50 base_currency/m^2
Cost_UnitSlab := (575 + 700)/19*USD/m^2
Cost_UnitBaffle := 360/19*USD/(12 ft) = 5.18027 base_currency/m
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S_FlocEstVF(ED_FlocBod, Q_Plant, W_FlocChannel, H_Floc) := max((K_FlocBaffle/(ED_FlocBod*H_Floc))^(1/3)*Q_Plant/W_FlocChannel, 1/(ED_FlocBod^(1/4)*Pi_VCBaffle)*(Pi_JetPlane*Q_Plant/W_FlocChannel)^(3/4))
N_FlocChannelSpacesVF(ED_FlocBod, Q_Plant, W_FlocChannel, L_FlocChannel, T_FlocBaffle, H_Floc) := Floor((L_FlocChannel + T_FlocBaffle)/(S_FlocEstVF(ED_FlocBod, Q_Plant, W_FlocChannel, H_Floc) + T_FlocBaffle), 2)
S_FlocVF(ED_FlocBod, Q_Plant, W_FlocChannel, L_FlocChannel, T_FlocBaffle, H_Floc) := (L_FlocChannel + T_FlocBaffle - N_FlocChannelSpacesVF(ED_FlocBod, Q_Plant, W_FlocChannel, L_FlocChannel, T_FlocBaffle, H_Floc)*T_FlocBaffle)/N_FlocChannelSpacesVF(ED_FlocBod, Q_Plant, W_FlocChannel, L_FlocChannel, T_FlocBaffle, H_Floc)
Ψ_BaffleVF(ED_FlocBod, Q_Plant, W_FlocChannel, L_FlocChannel, T_FlocBaffle, H_Floc) := min((S_FlocVF(ED_FlocBod, Q_Plant, W_FlocChannel, L_FlocChannel, T_FlocBaffle, H_Floc)*K_FlocBaffle/H_Floc)^(1/6), (Pi_JetPlane^3/Pi_VCBaffle^4)^(1/6))*(CFD_Constant^(1/6)*(K_FlocBaffle/2)^(1/3)*H_Floc^(2/3))
N_FlocChannelsVF(ED_FlocBod, Q_Plant, W_FlocChannel, L_FlocChannel, T_FlocBaffle, H_Floc) := Ceil(CP_Floc/(N_FlocChannelSpacesVF(ED_FlocBod, Q_Plant, W_FlocChannel, L_FlocChannel, T_FlocBaffle, H_Floc)*Ψ_BaffleVF(ED_FlocBod, Q_Plant, W_FlocChannel, L_FlocChannel, T_FlocBaffle, H_Floc)), 2)
N_FlocSpacesVF(ED_FlocBod, Q_Plant, W_FlocChannel, L_FlocChannel, T_FlocBaffle, H_Floc) := N_FlocChannelsVF(ED_FlocBod, Q_Plant, W_FlocChannel, L_FlocChannel, T_FlocBaffle, H_Floc)*N_FlocChannelSpacesVF(ED_FlocBod, Q_Plant, W_FlocChannel, L_FlocChannel, T_FlocBaffle, H_Floc) - 1
N_FlocSpacesVF(ED_FlocBod, Q_Plant, W_FlocChannel, L_FlocChannel, T_FlocBaffle, H_Floc) := N_FlocChannelsVF(ED_FlocBod, Q_Plant, W_FlocChannel, L_FlocChannel, T_FlocBaffle, H_Floc)*N_FlocChannelSpacesVF(ED_FlocBod, Q_Plant, W_FlocChannel, L_FlocChannel, T_FlocBaffle, H_Floc) - 1
V_FlocVF(ED_FlocBod, Q_Plant, W_FlocChannel, L_FlocChannel, T_FlocBaffle, H_Floc) := Q_Plant/(S_FlocVF(ED_FlocBod, Q_Plant, W_FlocChannel, L_FlocChannel, T_FlocBaffle, H_Floc)*W_FlocChannel)
h_eBaffleVF(ED_FlocBod, Q_Plant, W_FlocChannel, L_FlocChannel, T_FlocBaffle, H_Floc) := K_FlocBaffle*V_FlocVF(ED_FlocBod, Q_Plant, W_FlocChannel, L_FlocChannel, T_FlocBaffle, H_Floc)^2/(2*g)
h_eFlocVF(ED_FlocBod, Q_Plant, W_FlocChannel, L_FlocChannel, T_FlocBaffle, H_Floc) := h_eBaffleVF(ED_FlocBod, Q_Plant, W_FlocChannel, L_FlocChannel, T_FlocBaffle, H_Floc)*N_FlocSpacesVF(ED_FlocBod, Q_Plant, W_FlocChannel, L_FlocChannel, T_FlocBaffle, H_Floc)
H_FlocWallsVF(ED_FlocBod, Q_Plant, W_FlocChannel, L_FlocChannel, T_FlocBaffle, H_Floc) := H_Floc + h_eFlocVF(ED_FlocBod, Q_Plant, W_FlocChannel, L_FlocChannel, T_FlocBaffle, H_Floc) + H_PlantFreeboard
A_SlabVF(ED_FlocBod, Q_Plant, W_FlocChannel, L_FlocChannel, T_FlocBaffle, H_Floc) := (L_FlocChannel + 2*T_PlantWall)*(W_FlocChannel + T_PlantWall)*N_FlocChannelsVF(ED_FlocBod, Q_Plant, W_FlocChannel, L_FlocChannel, T_FlocBaffle, H_Floc)
A_WallsVF(ED_FlocBod, Q_Plant, W_FlocChannel, L_FlocChannel, T_FlocBaffle, H_Floc) := (L_FlocChannel + 2*W_FlocChannel + 2*T_PlantWall)*H_FlocWallsVF(ED_FlocBod, Q_Plant, W_FlocChannel, L_FlocChannel, T_FlocBaffle, H_Floc)*N_FlocChannelsVF(ED_FlocBod, Q_Plant, W_FlocChannel, L_FlocChannel, T_FlocBaffle, H_Floc)
Cost_SlabVF(ED_FlocBod, Q_Plant, W_FlocChannel, L_FlocChannel, T_FlocBaffle, H_Floc) := Cost_UnitSlab*A_SlabVF(ED_FlocBod, Q_Plant, W_FlocChannel, L_FlocChannel, T_FlocBaffle, H_Floc)
Cost_WallVF(ED_FlocBod, Q_Plant, W_FlocChannel, L_FlocChannel, T_FlocBaffle, H_Floc) := Cost_UnitWall*A_WallsVF(ED_FlocBod, Q_Plant, W_FlocChannel, L_FlocChannel, T_FlocBaffle, H_Floc)
Cost_WallSlabVF(ED_FlocBod, Q_Plant, W_FlocChannel, L_FlocChannel, T_FlocBaffle, H_Floc) := Cost_WallVF(ED_FlocBod, Q_Plant, W_FlocChannel, L_FlocChannel, T_FlocBaffle, H_Floc) + Cost_SlabVF(ED_FlocBod, Q_Plant, W_FlocChannel, L_FlocChannel, T_FlocBaffle, H_Floc)
L_FlocBafflesUpperVF(ED_FlocBod, Q_Plant, W_FlocChannel, L_FlocChannel, T_FlocBaffle, H_Floc, Pi_Baffle) := H_FlocWallsVF(ED_FlocBod, Q_Plant, W_FlocChannel, L_FlocChannel, T_FlocBaffle, H_Floc) - Pi_Baffle*S_FlocVF(ED_FlocBod, Q_Plant, W_FlocChannel, L_FlocChannel, T_FlocBaffle, H_Floc) - 0.5*H_PlantFreeboard
L_FlocBafflesLowerVF(ED_FlocBod, Q_Plant, W_FlocChannel, L_FlocChannel, T_FlocBaffle, H_Floc, Pi_Baffle) := min(Z_SedWeirExit - S_FlocVF(ED_FlocBod, Q_Plant, W_FlocChannel, L_FlocChannel, T_FlocBaffle, H_Floc), H_Floc - Pi_Baffle*S_FlocVF(ED_FlocBod, Q_Plant, W_FlocChannel, L_FlocChannel, T_FlocBaffle, H_Floc))
N_FlocBafflesUpperVF(ED_FlocBod, Q_Plant, W_FlocChannel, L_FlocChannel, T_FlocBaffle, H_Floc) := (N_FlocChannelSpacesVF(ED_FlocBod, Q_Plant, W_FlocChannel, L_FlocChannel, T_FlocBaffle, H_Floc)/2 - 1)*N_FlocChannelsVF(ED_FlocBod, Q_Plant, W_FlocChannel, L_FlocChannel, T_FlocBaffle, H_Floc)
N_FlocBafflesLowerVF(ED_FlocBod, Q_Plant, W_FlocChannel, L_FlocChannel, T_FlocBaffle, H_Floc) := N_FlocChannelSpacesVF(ED_FlocBod, Q_Plant, W_FlocChannel, L_FlocChannel, T_FlocBaffle, H_Floc)/2*N_FlocChannelsVF(ED_FlocBod, Q_Plant, W_FlocChannel, L_FlocChannel, T_FlocBaffle, H_Floc) - 1
L_FlocBafflesTotalVF(ED_FlocBod, Q_Plant, W_FlocChannel, L_FlocChannel, T_FlocBaffle, H_Floc, Pi_Baffle) := N_FlocBafflesUpperVF(ED_FlocBod, Q_Plant, W_FlocChannel, L_FlocChannel, T_FlocBaffle, H_Floc)*L_FlocBafflesUpperVF(ED_FlocBod, Q_Plant, W_FlocChannel, L_FlocChannel, T_FlocBaffle, H_Floc, Pi_Baffle) + N_FlocBafflesLowerVF(ED_FlocBod, Q_Plant, W_FlocChannel, L_FlocChannel, T_FlocBaffle, H_Floc)*L_FlocBafflesLowerVF(ED_FlocBod, Q_Plant, W_FlocChannel, L_FlocChannel, T_FlocBaffle, H_Floc, Pi_Baffle)
Cost_BafflesVF(ED_FlocBod, Q_Plant, W_FlocChannel, L_FlocChannel, T_FlocBaffle, H_Floc, Pi_Baffle) := Cost_UnitBaffle*L_FlocBafflesTotalVF(ED_FlocBod, Q_Plant, W_FlocChannel, L_FlocChannel, T_FlocBaffle, H_Floc, Pi_Baffle)
Cost_FlocVF(ED_FlocBod, Q_Plant, W_FlocChannel, L_FlocChannel, T_FlocBaffle, H_Floc, Pi_Baffle) := Cost_WallSlabVF(ED_FlocBod, Q_Plant, W_FlocChannel, L_FlocChannel, T_FlocBaffle, H_Floc) + Cost_BafflesVF(ED_FlocBod, Q_Plant, W_FlocChannel, L_FlocChannel, T_FlocBaffle, H_Floc, Pi_Baffle)
W_FlocChannelVF(ED_FlocBod, Q_Plant, L_FlocChannel, T_FlocBaffle, H_Floc, Pi_FlocBaffleMin) :=
    for i ∈ 0 .. max(W_FlocChannelMax - W_FlocChannelMin, 0)/cm
        W_FlocArray[i] ← W_FlocChannelMin + i*cm
        Cost_FlocArray[i] ← Cost_FlocVF(ED_FlocBod, Q_Plant, W_FlocArray[i], L_FlocChannel, T_FlocBaffle, H_Floc, Pi_FlocBaffleMin)
    MinCost ← min(Cost_FlocArray)
    Index ← match(min(Cost_FlocArray), Cost_FlocArray)
    W_FlocBest ← W_FlocArray[match(min(Cost_FlocArray), Cost_FlocArray)[0]]
    return W_FlocBest
W_FlocChannelV := W_FlocChannelVF(ED_Floc, Q_Plant, L_Sed, T_FlocBaffle, HW_FlocEnd, Pi_FlocBaffleMin) = 0.45 m
N_FlocChannelsV := N_FlocChannelsVF(ED_Floc, Q_Plant, W_FlocChannelV, L_Sed, T_FlocBaffle, HW_FlocEnd) = 2
EN_FlocBaffle :=
    EN_FlocBaffle ← 0 if EN_FlocHoriz == 1
    EN_FlocBaffle ← 1 otherwise
S_FlocPortGap :=
    T_ConcreteMin if (EN_FlocBaffle == 0) and (EN_FlocHoriz == 0)
    S_FlocBaffleSetBackPlastic if (EN_FlocBaffle == 1) and (EN_FlocHoriz == 0)
    (0 m) otherwise
    = 0.02 m
L_FlocChannelV := L_Sed = 7.48687 m
H_FlocV := H_FlocWallsVF(ED_Floc, Q_Plant, W_FlocChannelV, L_Sed, T_FlocBaffle, HW_FlocEnd) = 2.15174 m
S_FlocV := S_FlocVF(ED_Floc, Q_Plant, W_FlocChannelV, L_FlocChannelV, T_FlocBaffle, H_FlocV) = 0.26546 m
S_FlocBaffleV :=
    for i ∈ 0 .. N_FlocChannelsV - 1
        S[i] ← S_FlocV
    S
N_FlocSpacesV := N_FlocSpacesVF(ED_Floc, Q_Plant, W_FlocChannelV, L_FlocChannelV, T_FlocBaffle, H_FlocV) = 55
N_FlocChannelSpacesV :=
    for i ∈ 0 .. N_FlocChannelsV - 1
        N_Spaces[i] ← N_FlocChannelSpacesVF(ED_Floc, Q_Plant, W_FlocChannelV, L_Sed, T_FlocBaffle, HW_FlocEnd) - ((Q_Plant ≤ Q_PlantMaxLF) == 0)*(i == (N_FlocChannelsV - 1))*(ceil((W_SedInletChannelPreWeir + S_FlocPortGap)/S_FlocV) - (mod(ceil((W_SedInletChannelPreWeir + S_FlocPortGap)/S_FlocV), 2) == 0))
    N_Spaces
    = [28; 27]
N_FlocChannelBafflesV := N_FlocChannelSpacesV - 1 = [27; 26]
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h_eBaffleV := h_eBaffleVF(ED_Floc, Q_Plant, W_FlocChannelV, L_Sed, T_FlocBaffle, HW_FlocEnd) = 0.00357295 m
h_eFlocV := h_eFlocVF(ED_Floc, Q_Plant, W_FlocChannelV, L_Sed, T_FlocBaffle, HW_FlocEnd) = 0.196512 m  # Head loss through the vertical flocculator
# HORIZONTAL FLOCCULATOR
W_FlocChannelEstH := S_FlocBaffleCalcH*Pi_JSOptimal = 0.340021 m
α_ψ(Pi_JS) := min((4*Pi_JetPlane^3/(Pi_VCBaffle^2*K_FlocBaffle))^(1/6), (4/Pi_JS)^(1/6))
ψ_P(J, S) := α_ψ(J/S)*J^(2/3)*(K_FlocBaffle/2)^(1/3)
ψ_SpaceH := ψ_P(W_FlocChannelEstH, S_FlocBaffleCalcH) = 0.36928 m^(2/3)  # Defines the collision potential per space in a horizontal flocculator.
N_FlocChannelSpacesTotalH := ceil(CP_Floc/ψ_SpaceH) = 204  # Calculates the total number of spaces needed to achieve target energy dissipation
N_FlocSpacesPerChannelH := N_FlocSpacesFH(L_Sed, T_FlocBaffleRigidH, S_FlocBaffleCalcH) = 27
N_FlocChannelsH :=
    ceil(N_FlocChannelSpacesTotalH/N_FlocSpacesPerChannelH) if mod(ceil(N_FlocChannelSpacesTotalH/N_FlocSpacesPerChannelH), 2) == 0
    (ceil(N_FlocChannelSpacesTotalH/N_FlocSpacesPerChannelH) + 1) otherwise
# Determines the number of channels needed based on the number of spaces per channel and the total number of spaces.
N_FlocChannelSpacesH :=
    for i ∈ 0 .. N_FlocChannelsH - 1
        Spaces[i] ← N_FlocSpacesPerChannelH - (i == (N_FlocChannelsH - 1))*Ceil(W_SedInletChannelPreWeir/S_FlocBaffleCalcH, 2)
    return Spaces
N_FlocChannelBafflesH := N_FlocChannelSpacesH - 1
S_FlocBaffleH :=
    for i ∈ 0 .. N_FlocChannelsH - 1
        Local[i] ← SofN_FlocBaffleF(L_Sed, T_FlocBaffleRigidH, N_FlocChannelSpacesH[0])
    return Local
W_FlocChannelH := S_FlocBaffleH[0]*Pi_JSOptimal
HL_FlocBaffleH := K_FlocBaffle*Q_Plant^2/(2*g*(S_FlocBaffleH[0]*HW_FlocEnd)^2)  # Head loss per floc baffle in horizontal flocculator
N_FlocSpacesTotalH := sum(N_FlocChannelSpacesH)
HL_FlocH := HL_FlocBaffleH*N_FlocSpacesTotalH = 0.177946 m
# LOW FLOW FLOCCULATOR
W_FlocTankLF := W_HumanMin
H_FlocLF := HW_Sed = 1.85523 m
Π_HS := 5
fS_FlocLF(Q_Plant) := (K_FlocBaffle*Q_Plant^3/(Π_HS*ED_Floc))^(1/7)
fN_FlocBafflesPerChannelLF(Q_Plant) := Round(W_FlocTankLF/fS_FlocLF(Q_Plant), 2) - 1
N_FlocBafflesPerChannelLF := fN_FlocBafflesPerChannelLF(Q_Plant) = 1
S_FlocLF(Q_Plant) := W_FlocTankLF/(fN_FlocBafflesPerChannelLF(Q_Plant) + 1)
Pi_FlocBaffle := min(Pi_FlocBaffleMax, (HW_FlocEnd - 2*ConRadius(ND_FlocModulesLarge))/(2*S_FlocV))
Pi_FlocBaffle = 1.5
N_FlocObstaclesLF(Q_Plant) :=
    ceil(H_FlocLF/(S_FlocLF(Q_Plant)*Π_HS)) - 1 if Q_Plant ≤ Q_PlantMaxLF
    "null" otherwise  # Number of Obstacles
W_FlocChannelLF(Q_Plant) :=
    Q_Plant/S_FlocLF(Q_Plant)*(K_FlocBaffle/((H_FlocLF - 2*Pi_FlocBaffle*S_FlocLF(Q_Plant) + H_PlantFreeboard)/(N_FlocObstaclesLF(Q_Plant) + 1)*ED_Floc))^(1/3) if Q_Plant ≤ Q_PlantMaxLF
    "null" otherwise  # H is really the distance between obstacles.
W_FlocChannelLF(Q_Plant) = "null" cm  # This is the spacing between the ferrocement baffles
W_FlocChannelLast := outerdiameter(ND_SedManifold) + 2*S_Fitting = 0.319075 m
# We need to provide obstacles to create more energy dissipation in the vertical path between baffles because otherwise teh H/S ratio is too large. We can do this by connecting the plastic baffles with 1/2" PVC pipe and stringing larger diameter PVC pipe over the 1/2" PVC pipe as spacers and obstacles.
# Based on LFOM diameters for different flow rates
CP_FlocObstacleLF(Q_Plant) :=
    ψ_P((H_FlocLF - 2*Pi_FlocBaffle*S_FlocLF(Q_Plant) + H_PlantFreeboard)/(N_FlocObstaclesLF(Q_Plant) + 1), S_FlocLF(Q_Plant)) if Q_Plant ≤ Q_PlantMaxLF
    "null" otherwise
CP_FlocObstacleLF(Q_Plant) = "null"
CP_FlocBaffleLF(Q_Plant) :=
    CP_FlocObstacleLF(Q_Plant)*(1 + N_FlocObstaclesLF(Q_Plant)) if Q_Plant ≤ Q_PlantMaxLF
    "null" otherwise
CP_FlocBaffleLF(Q_Plant) = "null"
CP_FlocChannelLF(Q_Plant) :=
    (1 + fN_FlocBafflesPerChannelLF(Q_Plant))*CP_FlocBaffleLF(Q_Plant) if Q_Plant ≤ Q_PlantMaxLF
    "null" otherwise
fN_FlocChannelsLF(Q_Plant) :=
    Ceil(CP_Floc/CP_FlocChannelLF(Q_Plant) - 1, 2) + 1 if Q_Plant ≤ Q_PlantMaxLF
    "null" otherwise  # odd number of channels so that the last channel ends entering the sed tank.
N_FlocChannelsLF := fN_FlocChannelsLF(Q_Plant) = "null"
S_FlocBaffleLF :=
    if Q_Plant ≤ Q_PlantMaxLF
        for i ∈ 0 .. N_FlocChannelsLF - 1
            S[i] ← S_FlocLF(Q_Plant)
        S
    "null" otherwise
fN_FlocChannelSpacesLF(Q_Plant) := fN_FlocBafflesPerChannelLF(Q_Plant) + 1
N_FlocChannelSpacesLF :=
    if Q_Plant ≤ Q_PlantMaxLF
        for i ∈ 0 .. N_FlocChannelsLF - 1
            N_Spaces[i] ← fN_FlocChannelSpacesLF(Q_Plant) - ((Q_Plant ≤ Q_PlantMaxLF) == 0)*(i == (N_FlocChannelsV - 1))*(ceil((W_SedInletChannelPreWeir + S_FlocPortGap)/S_FlocV) - (mod(ceil((W_SedInletChannelPreWeir + S_FlocPortGap)/S_FlocV), 2) == 0))
        N_Spaces
    "null" otherwise
N_FlocChannelBafflesLF :=
    N_FlocChannelSpacesLF - 1 if Q_Plant ≤ Q_PlantMaxLF
    "null" otherwise
fh_eFlocLF(Q_Plant) :=
    fN_FlocChannelsLF(Q_Plant)*(1 + fN_FlocBafflesPerChannelLF(Q_Plant))*(1 + N_FlocObstaclesLF(Q_Plant))*K_FlocBaffle*(Q_Plant/(S_FlocLF(Q_Plant)*W_FlocChannelLF(Q_Plant)))^2/(2*g) if Q_Plant ≤ Q_PlantMaxLF
    "null" otherwise
h_eFlocLF := fh_eFlocLF(Q_Plant) = "null"
CP_FlocBaffleLF(Q_Plant) = "null"
N_FlocBafflesLF :=
    N_FlocChannelsLF*N_FlocBafflesPerChannelLF if Q_Plant ≤ Q_PlantMaxLF
    "null" otherwise
h_eFlocLFBaffle :=
    h_eFlocLF/(N_FlocBafflesLF + N_FlocObstaclesLF(Q_Plant)*fN_FlocChannelSpacesLF(Q_Plant)*fN_FlocChannelsLF(Q_Plant)) if Q_Plant ≤ Q_PlantMaxLF
    "null" otherwise
    = "null" cm
h_eFlocLFBaffle = "null"
# Assigning Final Parameters
HL_Floc :=
    h_eFlocLF if Q_Plant ≤ Q_PlantMaxLF
    h_eFlocV if EN_FlocHoriz == 0 and Q_Plant > Q_PlantMaxLF
    HL_FlocH otherwise
    = 0.196512 m
HL_FlocBaffle :=
    h_eFlocLFBaffle if Q_Plant ≤ Q_PlantMaxLF
    h_eBaffleV if EN_FlocHoriz == 0 and Q_Plant > Q_PlantMaxLF
    HL_FlocBaffleH otherwise
    = 0.00357295 m
Q_PlantMaxLF = 0.003 m^3/s
EN_FlocHoriz = 0
N_FlocChannels :=
    N_FlocChannelsLF if Q_Plant ≤ Q_PlantMaxLF
    N_FlocChannelsV if EN_FlocHoriz == 0 and Q_Plant > Q_PlantMaxLF
    N_FlocChannelsH otherwise
W_FlocChannel :=
    W_FlocChannelLF(Q_Plant) if Q_Plant ≤ Q_PlantMaxLF
    W_FlocChannelV if EN_FlocHoriz == 0 and Q_Plant > Q_PlantMaxLF
    W_FlocChannelH otherwise
    = 0.45 m
S_FlocBaffle :=
    S_FlocBaffleLF if Q_Plant ≤ Q_PlantMaxLF
    S_FlocBaffleV if EN_FlocHoriz == 0 and Q_Plant > Q_PlantMaxLF
    S_FlocBaffleH otherwise
S_FlocBaffleFirst := S_FlocBaffle[0]
Z_SedLaunder = 1.70202 m  # Defined in the sed tank
H_Sed = 1.95523 m  # Defined in the sed tank
H_Floc :=
    H_Sed + h_eFlocLF if Q_Plant ≤ Q_PlantMaxLF
    H_FlocWallsVF(ED_Floc, Q_Plant, W_FlocChannelV, L_Sed, T_FlocBaffle, HW_FlocEnd) if EN_FlocHoriz == 0 and Q_Plant > Q_PlantMaxLF
    HL_FlocH + HW_FlocEnd + H_PlantFreeboard otherwise
    = 2.15174 m
N_FlocChannelBaffles :=
    N_FlocChannelBafflesLF if Q_Plant ≤ Q_PlantMaxLF
    N_FlocChannelBafflesV if EN_FlocHoriz == 0 and Q_Plant > Q_PlantMaxLF
    N_FlocChannelBafflesH otherwise
B_FlocBaffle := S_FlocBaffle + T_FlocBaffle
H_FlocPort :=
    for i ∈ 0 .. N_FlocChannels - 1
        H_Port[i] ←
            (Pi_FlocBaffle*S_FlocV*W_FlocChannel/(S_FlocV - S_FlocPortGap)) if EN_FlocHoriz == 0
            H_Floc otherwise
    H_Port
W_FlocPort :=
    for i ∈ 0 .. N_FlocChannels - 2
        W_Port[i] ← S_FlocBaffle[0] - S_FlocPortGap
    W_Port[N_FlocChannels - 1] ← W_SedInletChannelPreWeir
    W_Port
    = [0.24546; 0.336537] m
# LFOM
W_Stout(HL_Lfom, z) := 2/(sqrt(2*g*z)*Pi_VenaContractaOrifice*π*HL_Lfom)  # Width of Stout opening area as a function of height (per unit flow!!!)
N_LfomRows(Q_Plant, HL_Lfom) := min(10, max(4, trunc(HL_Lfom/(4*(W_Stout(HL_Lfom, HL_Lfom)*Q_Plant)/(2*π)))))
fB_LfomRows(Q_Plant, HL_Lfom) := HL_Lfom/N_LfomRows(Q_Plant, HL_Lfom)
A_LfomOrificesTop(Q_Plant, HL_Lfom) := Q_Plant*integral(W_Stout(HL_Lfom, z), z = HL_Lfom - fB_LfomRows(Q_Plant, HL_Lfom) .. HL_Lfom)
D_LfomOrificesTopMax(Q_Plant, HL_Lfom) := 2*sqrt(A_LfomOrificesTop(Q_Plant, HL_Lfom)/π)
fD_LfomOrifices(Q_Plant, HL_Lfom, D_Drill) := FloorNearest(min(fB_LfomRows(Q_Plant, HL_Lfom), D_LfomOrificesTopMax(Q_Plant, HL_Lfom)), D_Drill)
V_LfomPipe.Avg(HL_Lfom) := 4/(3*π)*sqrt(2*g*HL_Lfom)
A_LfomPipeMin(Q_Plant, HL_Lfom, Π_LfomSafety) := Π_LfomSafety*Q_Plant/V_LfomPipe.Avg(HL_Lfom)
# Nominal pipe diameter corresponding to the calculated minimum diameter
fND_LfomPipe(Q_Plant, HL_Lfom, Π_LfomSafety, PS_Default) := NominalDiameter(2*sqrt(A_LfomPipeMin(Q_Plant, HL_Lfom, Π_LfomSafety)/π), PS_Default)
fHL_LfomHigh(Q_Plant, Π_LfomSafety, PS_Default) :=
    i ← 0
    while fND_LfomPipe(Q_Plant, HL_LfomMin + i*5*cm, Π_LfomSafety, PS_Default) > ND_LfomPipeMax and HL_LfomMin + i*5*cm < HL_LfomMax
        i ← i + 1
    j ← 0
    while fND_LfomPipe(Q_Plant, HL_LfomMin + i*5*cm, Π_LfomSafety - j*0.05, PS_Default) > ND_LfomPipeMax and Π_LfomSafety - j*0.05 > Π_LfomSafetyMin
        j ← j + 1
    return [HL_LfomMin + i*5*cm; (Π_LfomSafety - j*0.05)*m]
HL_Lfom := fHL_LfomHigh(Q_Plant, Π_LfomSafety, PS_Default)[0] = 0.2 m
D_LfomOrifices := fD_LfomOrifices(Q_Plant, HL_Lfom, D_Drill) = 0.03175 m
Q_ramp(Q_Plant, HL_Lfom) := ramp(fB_LfomRows(Q_Plant, HL_Lfom), fB_LfomRows(Q_Plant, HL_Lfom), HL_Lfom)/HL_Lfom*Q_Plant
fH_LfomOrifices(Q_Plant, HL_Lfom, D_Drill) := ramp(fD_LfomOrifices(Q_Plant, HL_Lfom, D_Drill)/2, fB_LfomRows(Q_Plant, HL_Lfom), HL_Lfom)
Q_LfomActual(Q_Plant, HL_Lfom, D_Drill, RowIndexSubmerged, n_Lfomorifices) :=
    Q ← 0*L/min
    D_LfomOrifices ← fD_LfomOrifices(Q_Plant, HL_Lfom, D_Drill)
    for i ∈ 0 .. RowIndexSubmerged
        Q ← Q + n_Lfomorifices[i]*Q_orificeV(D_LfomOrifices, ramp(fB_LfomRows(Q_Plant, HL_Lfom), fB_LfomRows(Q_Plant, HL_Lfom), HL_Lfom)[RowIndexSubmerged] - ramp(D_LfomOrifices/2, fB_LfomRows(Q_Plant, HL_Lfom), HL_Lfom)[i], Pi_VenaContractaOrifice)
    return Q
N_LfomOrificesperRowMax(Q_Plant, HL_Lfom, D_Drill, PS_Default) := floor(π*fND_LfomPipe(Q_Plant, HL_Lfom, Π_LfomSafety, PS_Default)/(fD_LfomOrifices(Q_Plant, HL_Lfom, D_Drill) + S_LfomOrificesMin))
# A bound on the number of orifices allowed in each row.  The distance between consecutive orifices must be enough to retain structural integrity of the pipe
fN_LfomOrifices(Q_Plant, HL_Lfom, D_Drill, PS_Default) :=
    Q_ramplocal ← Q_ramp(Q_Plant, HL_Lfom)
    D_LfomOrifices ← fD_LfomOrifices(Q_Plant, HL_Lfom, D_Drill)
    H_ramplocal ← ramp(D_LfomOrifices/2, fB_LfomRows(Q_Plant, HL_Lfom), HL_Lfom)
    n[last(H_ramplocal)] ← 0
    for i ∈ 0 .. last(H_ramplocal)
        n[i] ←
            min(max(0, round((Q_ramplocal[i] - Q_LfomActual(Q_Plant, HL_Lfom, D_Drill, i, n))/Q_orificeV(D_LfomOrifices, ramp(fB_LfomRows(Q_Plant, HL_Lfom), fB_LfomRows(Q_Plant, HL_Lfom), HL_Lfom)[i] - ramp(D_LfomOrifices/2, fB_LfomRows(Q_Plant, HL_Lfom), HL_Lfom)[i], Pi_VenaContractaOrifice))), N_LfomOrificesperRowMax(Q_Plant, HL_Lfom, D_Drill, PS_Default)) if fND_LfomPipe(Q_Plant, HL_Lfom, Π_LfomSafety, PS_Default) ≤ 12 in
            max(0, round((Q_ramplocal[i] - Q_LfomActual(Q_Plant, HL_Lfom, D_Drill, i, n))/Q_orificeV(D_LfomOrifices, ramp(fB_LfomRows(Q_Plant, HL_Lfom), fB_LfomRows(Q_Plant, HL_Lfom), HL_Lfom)[i] - ramp(D_LfomOrifices/2, fB_LfomRows(Q_Plant, HL_Lfom), HL_Lfom)[i], Pi_VenaContractaOrifice))) otherwise
    return n
N_LfomOrifices := fN_LfomOrifices(Q_Plant, HL_Lfom, D_Drill, PS_Default)
H_LfomOrifices := fH_LfomOrifices(Q_Plant, HL_Lfom, D_Drill)
N_LfomOrifices = [12; 3; 3; 3; 2; 3]
Y := sum(N_LfomOrifices) = 26
H_LfomOrifices = [0.015875; 0.0492083; 0.0825417; 0.115875; 0.149208; 0.182542] m
Π_LfomSafety = 1.5
V_LfomPipe.Avg(HL_Lfom) = 0.84058 m/s
Q_Plant = 0.02 m^3/s
Q_LfomActual(Q_Plant, HL_Lfom, D_Drill, 5, N_LfomOrifices) = 0.0199757 m^3/s
HL_Lfom = 0.2 m
B_LfomOrifices := H_LfomOrifices[last(H_LfomOrifices)] - H_LfomOrifices[real(H_LfomOrifices)] = 0.166667 m
HL_LfomCheck := B_LfomOrifices + D_LfomOrifices = 0.198417 m
HL_LfomCheck = 0.198417 m
# Length, Width, and Height Calculations (no grit =1)
HL_Flowmeasure :=
    HL_Lfom if EN_LinearFlow
    HL_Nlfom otherwise
B_LfomRows := fB_LfomRows(Q_Plant, HL_Lfom) = 3.33333 cm  # Center-to-center spacing between LFOM rows
ND_LfomPipe :=
    2 in if Q_Plant == 1.6*L/s
    fND_LfomPipe(Q_Plant, HL_Lfom, Π_LfomSafety, PS_Default) otherwise
ND_RMPipe := ND_LfomPipe = 10 in
W_LfomChannel := W_HumanMin = 0.45 m
W_EtFloatChannel := 2*ConRadius(ND_EtFloat) + 2*S_EtFloat + W_LfomChannel + T_ChannelWall = 1.03654 m
W_EtFloatChannelDrain := 2*ConRadius(ND_EtFloat) + 2*S_EtFloat + W_LfomChannel + T_ChannelWall + 2*S_Fitting + 2*ConRadius(ND_EtDrain) = 1.23814 m
W_EtFloatDrainLFOM := 2*ConRadius(ND_EtFloat) + S_EtFloat + 2*ConRadius(ND_RMPipe) + 2*S_Fitting + 2*ConRadius(ND_EtDrain) + L_EtSupport
ND_EtOverflowDrain := D_PipeChannel(Q_Plant/2, PS_Default) = 6 in
W_EtSupportDrainChannel := 2*(L_EtSupport + T_ChannelWall - T_PlantWall) + 3*S_Fitting + 2*ConRadius(ND_EtDrain) + 2*ConRadius(ND_EtOverflowDrain)
W_EtFirstHopperTwoInlet := 4*(S_Fitting + ConRadius(ND_EtDrain)) + T_EtRemovableWall + 2*T_EtRemovableWallSupport + 2*L_EtSupport
W_EtDCMinRMFit := max(W_EtDCMin, 2*ConRadius(ND_RMPipe)) = 0.300038 m
# Note this Width needs a lot of figuring to calculate the witdth the slopes will take up
W_EtDCLFOM := W_EtDCMinRMFit + T_PlantWall + S_Fitting + OuterDiameterFittingPVC(ND_RMPipe) + S_Fitting = 0.850075 m
W_EtDCOverflow := W_EtDCMinRMFit + SocketDepth(ND_EtOverflowDrain) + ElbowRadius(ND_EtOverflowDrain) + ConRadius(ND_EtOverflowDrain) + S_Fitting = 0.727713 m
W_EtMin :=
    max(W_HumanMin, W_EtFloatDrainLFOM, W_EtSupportDrainChannel, W_EtDCLFOM, W_EtDCOverflow, W_EtFirstHopperTwoInlet) if EN_TwoInlets == 1
    max(W_HumanMin, W_EtFloatDrainLFOM, W_EtSupportDrainChannel, W_EtDCLFOM, W_EtDCOverflow) if EN_LfomPipe == 1
    max(W_HumanMin, W_EtFloatChannelDrain, W_EtDCOverflow) otherwise
    = 1.23818 m
H_EtHopperMax := HW_EtMax - HL_Flowmeasure = 1.3 m  # so that the entrance tank doesn't get too deep
L_EtMax := L_Sed = 7.48687 m  # maximum length to prevent enlarging the plant footprint
L_LfomChannelOrifices := (D_LfomOrifices + S_LfomOrificesMin)*(N_LfomOrifices[0] + 1) + 2*T_ConcreteMin = 0.57775 m
L_LfomChannel := max(L_LfomChannelOrifices)
L_EtHopperMax :=
    min(2*(H_EtHopperMax/tan(AN_EtSlopeMax) + ConRadius(ND_EtDrain) + S_Fitting), (L_EtMax - mod(EN_LfomPipe + 2, 2)*(2*ConRadius(ND_EtDrain) + 2*S_Fitting) - L_LfomChannel*mod(EN_LfomPipe + 1, 2) - 2*T_EtHopperLedge)/2) if EN_LfomPipe == 0
    min(2*(H_EtHopperMax/tan(AN_EtSlopeMax) + ConRadius(ND_EtDrain) + S_Fitting), (L_EtMax - 2*ConRadius(ND_EtDrain) - 2*S_Fitting - 2*T_EtHopperLedge)/2) otherwise
    = 2.8016 m
H_EtHopperMin :=
    (35 cm) if Q_Plant ≤ 3*L/s
    (50 cm) otherwise
    = 0.5 m  # so that the hoppers aren't so small that they need to be drained frequently
L_EtHopperMin := min(L_EtHopperMax, max(2*(H_EtHopperMin/tan(AN_EtSlopeMax) + S_Fitting + ConRadius(ND_EtDrain)), 2*(OuterDiameterFittingPVC(ND_RMPipe) - ConRadius(ND_EtDrain) + S_Fitting), 2*(S_EtFloat + ConRadius(ND_EtFloat)))) = 1.2016 m
L_EtCaptureEffectiveMin :=
    Q_Plant/V_EtUpMin/W_EtMin if Q_Plant/V_EtUpMin/W_EtMin + 2*(L_EtHopperMin/2 + ConRadius(ND_EtDrain) + S_Fitting + T_EtHopperLedge) < L_Sed
    "null" otherwise
    = 2.0191 m
# ensures at least 1 full hopper, use max length to minimize #hoppers
N_EtFullHopperHigh :=
    Ceil((L_EtCaptureEffectiveMin + T_EtHopperLedge)/(L_EtHopperMax + T_EtHopperLedge), 1) if L_EtCaptureEffectiveMin ≠ "null" and L_EtCaptureEffectiveMin - (floor((L_EtCaptureEffectiveMin + T_EtHopperLedge)/(L_EtHopperMax + T_EtHopperLedge)) - 1)*T_EtHopperLedge ≤ L_EtCaptureEffectiveMin
    max(floor((L_EtCaptureEffectiveMin + T_EtHopperLedge)/(L_EtHopperMax + T_EtHopperLedge)), 1) if L_EtCaptureEffectiveMin ≠ "null" and L_EtCaptureEffectiveMin - (floor((L_EtCaptureEffectiveMin + T_EtHopperLedge)/(L_EtHopperMax + T_EtHopperLedge)) - 1)*T_EtHopperLedge > L_EtCaptureEffectiveMin
    Ceil((L_EtMax - mod(EN_LfomPipe + 4, 3)*(L_EtHopperMin/2 + ConRadius(ND_EtDrain) + S_Fitting) - (L_LfomChannel + ConRadius(ND_EtDrain) + S_Fitting)*mod(EN_LfomPipe + 1, 2))/(L_EtHopperMax + T_EtHopperLedge), 1) otherwise
N_EtFullHopper :=
    Ceil((L_EtCaptureEffectiveMin + T_EtHopperLedge)/(L_EtHopperMax + T_EtHopperLedge), 1) if L_EtCaptureEffectiveMin ≠ "null"
    Ceil((L_EtMax - 2*(L_EtHopperMin/2 + ConRadius(ND_EtDrain) + S_Fitting))/(L_EtHopperMax + T_EtHopperLedge), 1) otherwise
    = 1
N_EtFullHopper :=
    N_EtFullHopper if EN_LfomPipe == 1
    N_EtFullHopperHigh otherwise
    = 1
L_EtHopper :=
    if EN_LfomPipe == 0
        max(L_EtHopperMin, {
            (L_EtCaptureEffectiveMin - N_EtFullHopper*T_EtHopperLedge)/N_EtFullHopper if L_EtCaptureEffectiveMin ≠ "null"
            (L_EtMax - (2*ConRadius(ND_EtDrain) + 2*S_Fitting) - T_EtHopperLedge*(N_EtFullHopper + 1) - L_LfomChannel*mod(EN_LfomPipe + 1, 2))/(N_EtFullHopper + 1) otherwise
        })
    otherwise
        max(L_EtHopperMin, {
            (L_EtCaptureEffectiveMin - N_EtFullHopper*T_EtHopperLedge)/N_EtFullHopper if L_EtCaptureEffectiveMin ≠ "null"
            (L_EtMax - 2*ConRadius(ND_EtDrain) - 2*S_Fitting - T_EtHopperLedge*(N_EtFullHopper + 1))/(N_EtFullHopper + 1) otherwise
        })
    = 1.8691 m  # when we go to L.EtHopperMin we sacrifice 45 deg slope
L_EtChannelPipesMin :=
    (0.5*(L_EtHopper/2 + ConRadius(ND_EtDrain) + S_Fitting) - ShortTeeLength(ND_EtOverflowDrain) - CapThickness(ND_EtOverflowDrain)) if EN_EtGrit == 0
    W_rectweir(Q_Plant, 5 cm)/2 otherwise
    = 0.366863 m
W_Et1 := max(L_EtChannelPipesMin, 2*ConRadius(ND_EtFloat) + S_EtFloat + 2*ConRadius(ND_RMPipe) + 3*S_Fitting) = 0.786575 m
L_EtChannelPipes1 := W_Et1 = 0.786575 m
L_EtOverflowWeir1 := 2*L_EtChannelPipes1 = 1.57315 m
H_EtLFOMtoOverflow := 3 cm
A_EntranceFlow := 1.1*π/4*D_pipe(Q_Plant, AvailND, HL_Flowmeasure + S_Fitting + H_EtLFOMtoOverflow, HL_Flowmeasure + S_Fitting + H_EtLFOMtoOverflow, Nu_Water, E_Concrete, K_PipeEnt)^2
A_EntranceFlow = 0.00891805 m^2
S_EtBaffleBottom := max(10 cm, A_EntranceFlow/W_Et1) = 0.1 m
ND_EtInlet := D_pipe(Q_Plant, AvailND, 1 m, 100 m, Nu_Water, E_Concrete, K_PipeEnt + K_PipeExit) = 8 in
S_EtBaffle := max(A_EntranceFlow/W_Et1, 2*ConRadius(ND_EtInlet) + 2*S_Fitting) = 0.336537 m
HL_EtBaffle := K_FlocBaffle*(Q_Plant/(S_EtBaffle*W_Et1))^2/(2*g) = 0.000727616 m
L_Et1 := 2*(S_Fitting + ConRadius(ND_RMPipe)) + ElbowRadius(ND_EtOverflowDrain) + SocketDepth(ND_EtOverflowDrain) + ConRadius(ND_EtOverflowDrain) + S_Fitting + T_ConcreteMin + S_EtBaffle = 1.21425 m
L_Et1 = 1.21425 m
HW_Et1 := HL_Flowmeasure + S_Fitting + 2*CapHeight(ND_EtFloat) = 0.57385 m
H_Et1 := HL_EtBaffle + HW_Et1 + H_PlantFreeboard = 0.674578 m
# Rapid Mix
# Normal Flow
D_RMOrifice := D_PipeED(E_MaxRM, Q_Plant, Pi_VenaContractaOrifice, Pi_JetRound) = 0.176447 m
HL_RMMicroOrifice := h_orifice(D_RMOrifice, Pi_VenaContractaOrifice, Q_Plant) = 8.59383 cm
HL_RMPipe :=
    h_l(Q_Plant, innerdiameter(ND_RMPipe, PS_Default), 2*HW_EtMax + W_EtWalkway, K_El90 + K_PipeExit, Nu_Water, E_Pvc) if Q_Plant > Q_PlantMaxLF
    h_l(Q_Plant, innerdiameter(ND_RMPipe, PS_Default), 2*HW_EtMax + W_EtWalkway, 3*K_El90 + K_PipeExit, Nu_Water, E_Pvc) otherwise
HL_RMPipe = 0.0185803 m
# Rapid mix and LFOM Channel calculations for super high flow
L_RMChannel := W_EtWalkway = 1 m
HL_ChannelMax = 0.05 m
K_RMGate := 1
# Based on the assumption that the LFOM channel will be square.
HW_LfomChannel == H_HorizChannelΠ(Q_Plant, 1, HL_ChannelMax, L_LfomChannel, Nu_Water, E_Concrete, 0)
K_RMChannel := K_90 + 2*K_RmLfom + K_RMGate = 3.4
H_LfomChannel == HW_LfomChannel + HL_Lfom + H_PlantFreeboard
fW_RMChannel(Q, HL, K) := sqrt(Q*(K/(HL*2*g))^(1/2))
W_LfomChannel == W_HorizChannelΠ(Q_Plant, 1, HL_ChannelMax, L_LfomChannel, Nu_Water, E_Concrete, 0) = 0
HW_RMChannel == HW_LfomChannel - HL_ChannelMax
W_RMChannelMin := fW_RMChannel(Q_Plant/2, HL_ChannelMax, K_RMChannel) = 0.136455 m
W_RMChannel := max(W_RMChannelMin, W_HumanMin) = 0.45 m
H_RMChannel := W_RMChannel = 0.45 m
V_RMChannel(Q_Plant) := Q_Plant/W_RMChannel^2
HL_RMChannel := h_lrect(Q_Plant/2, W_RMChannel, H_RMChannel, L_RMChannel, K_90, Nu_Water, E_Concrete, 0) = 0.00590689 cm
HL_RMGate := (V_RMChannel(Q_Plant/2)/ε_RMGate)^2/(2*g) = 0.0497347 cm
HW_Sed = 1.85523 m
HL_RapidMix := HL_RMChannel + HL_RMGate = 0.0556416 cm
# The HL_RMMicroOrifice here just represents the head loss due to orifice in the RM pipe
# estimate the length of RM pipe using:2*HW_EtMax + W_EtWalkway
ZW_RMPipe :=
    HW_Sed + HL_Floc + HL_RMMicroOrifice + HL_RMPipe if EN_LfomPipe == 1 and EN_DoubleTrain == 0
    HW_Sed + HL_Floc + HL_RapidMix if EN_DoubleTrain == 1
    HW_Sed + HL_Floc + HL_RapidMix otherwise
    = 2.15626 m
# Elevation of the water inside the rapid mix pipe in the Tee outside the entrance tank
HW_Sed + HL_Floc + HL_RMMicroOrifice + HL_RMPipe = 2.15626 m
HW_Sed + HL_Floc + HL_RapidMix = 2.0523 m
ZW_RM := ZW_RMPipe = 2.15626 m
# elevation of the maximum water level in the entrance tank (relative to plant datum)
# This freefall is a safety factor inside the lfom
HW_Sed + HL_Floc + HL_RapidMix = 2.0523 m
D_LfomChannelOrifice := D_PipeED(E_MaxRM, Q_Plant/2, Pi_VenaContractaOrifice, Pi_JetRound) = 0.1311 m
# A orifice will be added in the channel before the 90 degree bend to ensure macromixing occurs. This will be a orifice in a ferrocement/concrete sheet.
HL_LfomChannelOrifice := h_orifice(D_LfomChannelOrifice, Pi_VenaContractaOrifice, Q_Plant/2) = 0.0704982 m
ZW_LfomChannel := HW_Sed + HL_Floc + HL_RapidMix + HL_LfomChannelOrifice = 2.12279 m
H_WalkwayToTankWall := H_SedInletChannel = 0.395281 m
# this is the max height you can get without a coupling
Z_Walkway := Plant_Origin[0] + H_Sed - H_WalkwayToTankWall = 1.55995 m
Z_RMChannelBottom := Z_Walkway - Z_Walkway = 0 m
Z_LfomChannelBottom := Z_RMChannelBottom = 0 m
HW_LfomChannel := ZW_LfomChannel - Z_LfomChannelBottom = 2.12279 m
HL_LfomChannel := h_frect(Q_Plant/2, W_LfomChannel, HW_LfomChannel, L_LfomChannel, Nu_Water, E_Concrete, 1) = 1.43089e-7 m
HW_RMChannel := HW_LfomChannel - HL_ChannelMax = 2.07279 m
# Heights and Elevations
HL_RMPipe = 0.0185803 m
# estimate the length of RM pipe using:2*HW_EtMax + W_EtWalkway
# elevation of the maximum water level in the entrance tank (relative to plant datum)
# This freefall is a safety factor inside the lfom
ZW_Et :=
    (ZW_RM + H_Freefall + HL_Flowmeasure) if EN_LfomPipe == 1
    ZW_LfomChannel + HL_Lfom + H_Freefall20 + HL_LfomChannel otherwise
    = 2.45626 m
Z_EtTop := ZW_Et + H_PlantFreeboard = 2.55626 m  # Elevation of the top of the entrance tank walls (includes freeboard)
H_EtHopper := min((L_EtHopper - 2*(ConRadius(ND_EtDrain) + S_Fitting))/2*tan(AN_EtSlopeMax), H_EtHopperMax) = 0.83375 m
HW_Et0 := H_EtHopper + HL_Flowmeasure = 1.03375 m
H_EtTop := HL_Flowmeasure + H_PlantFreeboard = 0.3 m
H_Et0 := HW_Et0 + H_PlantFreeboard = 1.13375 m
HW_Et :=
    HW_Et0 if EN_EtGrit == 0
    HW_Et1 otherwise
    = 1.03375 m
Z_Et := ZW_Et - HW_Et = 1.42251 m  # bottom elevation of entrance tank (same as the drain entrance elevation)
Z_EtHopper := Z_Et + H_EtHopper = 2.25626 m  # Top elevation of the first set of hoppers. (The peak of the pyramid)
Z_RmMicroMix := Z_SedWeirExit = 1.7941 m
# This is the maximum elevation of the micromix plate to ensure that it is submerged until the plant flow stops. Since we are putting the plate in the flocculator entrance coupling this should not be an issue.
# Linear case
Z_LfomOrifices := ZW_Et - HL_Flowmeasure + D_LfomOrifices/2 = 2.27213 m
# elevation centers of the bottom orifices of the LFOM. The bottom of the bottom row of orifices is at the zero elevation
# Entrance Tank
# Component Wise Hydraulic Gradient
# Stacked Rapid Sand Filter
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# Starting point of analysis : The filter exit tank bottom. For the purposes of this analysis, the head changes of the distribution pipe after the exit tank are ignored.
# From the design server autocad plant drawing, we are tracing the path of water and accounting for all head changes by virtue of elevation and frictional losses. We are trying to map the peizometric head changes across each component.
# Plant origin is the bottom of the sedimentation tank so we need to adjust absolute elevations based on plant origin if we use functions from the design code where elevations are relative to plant origin. Once the absolute elevations or head is determined, the hed is corrected back to the plant origin so that the datum is consistent for the entire plant i.e. the plant origin.
# Head of water at the bottom of filter exit box
Z_FiExitBottom := Z_FiEntranceBottom = 0.650086 m
# These elevations are from the plant origin and not the absolute filter bottom.
H_FiEntrance := ZW_FiInletChannel + H_PlantFreeboard - Z_FiEntranceBottom = 1.14044 m
H_FiExit := H_FiEntrance = 1.14044 m
# The outlet piping vertical head from filter box to bottom of exit box
W_FiOverflow :=
    (W_Fi + T_FiWall - W_FiEntrance - 2*T_PlantWall) if N_Fi > 1
    W_FiOverflowMin otherwise
L_FiInletChannel := N_Fi*W_FiEntrance + (N_Fi - 1)*(W_FiOverflow + 2*T_PlantWall) = 1.14744 m
W_FiInletChannelFlowDist := W_HorizChannel(Q_Plant, HW_FiInletChannel, HL_FiInletChannel, L_FiInletChannel, Nu_Water, E_Concrete, 0) = 0.155389 m
W_FiInletChannel := max(W_FiInletChannelFlowDist, W_FiInletChannelMin) = 0.3 m
W_PlantDC := W_DCWalkway = 1 m
Fi_origin := [
    Plant_Origin[0] - W_FiInletChannel - 5*T_PlantWall - T_FiWall - L_FiEntrance - L_FiExit - W_MpWalkway - L_Sed - W_PlantDC;
    Plant_Origin[1] + N_SedTanks*(W_Sed + T_PlantWall) - T_PlantWall - W_Fi/2 - ConRadius(ND_FiBwTrunk) - S_Fitting;
    Z_FiBottom
]
# The Y position is set so that the northern wall of the filter inlet channel aligns with the northern wall of the sed tanks (we want the inlet pipes to fit along the length of the inlet channel)
# The pipes are numbered with 0 as the top pipe
Z_FiInPipe3aEnd := Fi_origin[2] + outerradius(ND_FiBwManBranch) + H_FiBottomLayer + H_FiLayer + ElbowRadius(ND_FiTrunk) = -2.14191 m
Z_FiOutPipe3aEnd := Z_FiInPipe3aEnd + H_FiLayer = -1.94191 m
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Fi_origin = [-12.3132; 2.5506; -2.85464] m
Z_FiOutPipe1aEnd := Z_FiOutPipe3aEnd + 2*H_FiLayer = -1.54191 m  # The filter origin isFi_origin[2] = -2.85464 m
Z_FiOutPipe0aEnd := Z_FiOutPipe1aEnd + 2*H_FiLayer = -1.14191 m
Z_FiOutPipeAvg := Absolute(Z_FiOutPipe0aEnd + Z_FiOutPipe1aEnd + Z_FiOutPipe3aEnd)/3 = 1.54191 m
Z_FiInPipe2aEnd := Fi_origin[2] + outerradius(ND_FiBwManBranch) + H_FiBottomLayer + H_FiLayer + ElbowRadius(ND_FiTrunk) = -2.14191 m
Z_FiInPipe1aEnd := Z_FiInPipe2aEnd + 2*H_FiLayer = -1.74191 m
Z_FiInPipe0aEnd := Z_FiInPipe1aEnd + 2*H_FiLayer = -1.34191 m
Z_FiInPipeAvg := Absolute(Z_FiInPipe0aEnd + Z_FiInPipe1aEnd + Z_FiInPipe2aEnd + Z_FiInPipe3aEnd)/4 = 1.84191 m
# The minimum head loss through the bed will be conservative estimate on whether the entrance tank will flood and the maximum head loss will be a conservative estimate on whether the exit tank will flood or not.
HL_FiPathCleanMin(Q_1, Q_2, Q_3, Q_4, Q_5, Q_6) = 0.158823 m
HL_FiPathCleanMax(Q_1, Q_2, Q_3, Q_4, Q_5, Q_6) = 0.182156 m
HL_FiCalculated := HL_FiEntranceWeir + HL_FiInletManifold(Q_FiLayer) + HL_FiPathCleanMax(Q_1, Q_2, Q_3, Q_4, Q_5, Q_6) + HL_FiSlot = 0.267025 m
HL_FiMax := max(HL_FiCalculated, HL_FiDirty) = 0.4 m
ZW_FiEntrance := ZW_FiEntranceTerminal - Z_FiEntranceBottom = 0.9 m
ZW_FiExit := ZW_FiEntrance - HL_FiPathCleanAve(Q_1, Q_2, Q_3, Q_4, Q_5, Q_6) = 0.725993 m
Check_FiEntrance :=
    "OK" if ZW_FiEntrance < H_FiEntrance
    "ERROR IN FILTER ENTRANCE BOX" otherwise
    = "OK"
# The depth of water in the associated component of the lter should always be less than the depth or dimension of the component. If this exceed the depth of the tank, it implies that the tank will flood.
Check_FiExit :=
    "OK" if ZW_FiExit < H_FiExit
    "ERROR IN FILTER EXIT BOX" otherwise
    = "OK"
HL_FiAvailable := ZW_FiEntranceMax - ZW_FiExit = 0.89009 m
# The overall head loss incurred in the filter is given by the difference in water level of the entrance and exit tank of the filter.
Check_FiHL1 :=
    "OK" if HL_FiMax < HL_FiAvailable
    "HEAD LOSS IN FILTER EXCEEDS AVAILABLE HEAD LOSS" otherwise
    = "OK"  # HL.available should always be greater than HL.FiMax
ZW_FiEntranceMax = 1.61608 m  # The water depth in entrance tank should always be greater than that of filter water depth to account for inlet plumbing losses.
ZW_FiMax = 1.51712 m
Check_FiHL2 :=
    "OK" if ZW_FiMax < ZW_FiEntranceMax
    "ERROR IN FILTER WATER DEPTH- EXCEEDS ENTRANCE TANK WATER DEPTH" otherwise
    = "OK"
# This point of analysis is at the bottom of the exit tank, where the distribution pipe joins in
He_FiDistPipe := Z_FiEntranceBottom = 0.650086 m
He_FiExit := ZW_FiExit + Z_FiEntranceBottom = 1.37608 m
Z_FiTop := Z_FiEntranceBottom + H_FiEntrance = 1.79053 m
Z_FiBottom = -2.85464 m
H_Fi := Z_FiTop - Z_FiBottom = 4.64517 m
Z_FiOutPipeAvg = 1.54191 m
ZW_Fi := ZW_FiEntrance - HL_FiInletPlumbingAve(Q_1, Q_2, Q_3, Q_4) + Z_FiEntranceBottom + Absolute(Z_FiBottom) = 4.37346 m
Check_Fi :=
    "OK" if ZW_Fi < H_Fi
    "ERROR IN FILTER BOX" otherwise
    = "OK"  # ZW.Fi takes into account the elevation from the bottom  of the filter so it is corrected from the plant origin to the origin of the filter.
# Head of water above the outlet pipe and elevation from bottom of plant origin corrected for the filter bottom
He_FiOutPiping := ZW_Fi - Absolute(Z_FiBottom) = 1.51882 m
# The head of water in case of the piping will be equal to the head of water in the filter and elevation from the bottom of the filter.
HL_FiOutCheck := He_FiOutPiping - He_FiExit = 0.142743 m
# This point of analysis is in the main filter box
HL_FiOutletPlumbingAve(Q_1, Q_3) = 0.0808095 m
HL_FiExit := HL_FiPathCleanAve(Q_1, Q_2, Q_3, Q_4, Q_5, Q_6) - HL_FiInletPlumbingAve(Q_1, Q_2, Q_3, Q_4) = 0.142743 m
He_FiInPiping := He_FiOutPiping
# The clean path head loss includes the head loss due to inlet plumbing so we
# need to exclude it to estimate head loss between the outlet box and filter box since we are analyzing the head loss incurred in the filter in context of outlet alone. If the analysis is sound HL.FiOutCheck = HL.FiExit and HL.FiInCheck = HL_FiInletPlumbingAve
He_Fi := ZW_Fi - Absolute(Z_FiBottom) = 1.51882 m
He_FiEntrance := ZW_FiEntrance + Z_FiEntranceBottom = 1.55009 m
HL_FiInCheck := He_FiEntrance - He_FiInPiping = 0.0312639 m
# This check is added to ensure if the hydraulic head is estimated correctly by our analysis or not. If the head is correct then the difference between the head of two points of analysis should be equal to the head loss calculated between the same points.
HL_FiInletPlumbingAve(Q_1, Q_2, Q_3, Q_4) = 0.0312639 m
# The analysis point is the entrance box of the filter upto the sedimentation tank exit weir. For this analysis the datum  will also be the bottom of the sedimentation tank which coincides with the plant orgin.
He_FiOverFlowWeir := ZW_FiEntranceTerminal = 1.55009 m
He_FiEntranceMax := He_FiOverFlowWeir + HL_FiOverflowWeir = 1.61608 m
He_FiEntranceWeir := He_FiEntranceMax + H_FiWeirFreefall = 1.64608 m
He_FiInletChannel := He_FiEntranceWeir + HL_FiEntranceWeir = 1.69053 m
H_FiInletChannel := Z_FiTop - Z_FiInletChannelBottom = 1.14044 m
Z_FiInletChannel := H_FiInletChannel + Z_FiInletChannelBottom = 1.79053 m
He_SedWeirExit := He_FiInletChannel + HL_ChannelMax + HL_FiEntrancePipe = 1.7941 m
Z_SedWeirExit = 1.7941 m
Check_FiInletChannel :=
    "OK" if He_FiInletChannel < Z_FiInletChannel
    "ERROR IN SRSF INLET CHANNEL " otherwise
    = "OK"
Check_SedWeirExit :=
    "OK" if He_SedWeirExit ≤ Z_SedWeirExit
    "ERROR IN SEDIMENTATION TANK EXIT WEIR " otherwise
    = "OK"
# In case of weirs the water depth is the absolute dimension of the weir and has no freeboard so we need incorporate the equality in addition to less than, to check for flooding.
# Not much room to spare here! We need to always check this and somehow report an error if this is negative!!!!
Check_Siphon := (Z_FiSiphonCouplingMax - Z_FiSiphonCouplingMin) = 0.0286211 m  # This is still  negative, can we check with Drew?
Check_FiSiphon :=
    "OK" if Check_Siphon ≥ 0
    "ERROR IN SIPHON ELEVATION ESTIMATION " otherwise
    = "OK"
H_FiSiphonPressure := ZW_FiMax - Z_FiSiphonCouplingMin = 0.759813 m  # This cannot be greater than Z_FiSiphonOutlet - Z_FiBottom = 1.99108 m
Check_SiphonPressure := Z_FiSiphonOutlet - Z_FiBottom = 1.99108 m
Check_FiSiphonPressure :=
    "OK" if H_FiSiphonPressure < Check_SiphonPressure
    "ERROR IN SIPHON PRESSURE ESTIMATION " otherwise
    = "OK"
HL_FiBwSlotForward = 0.0162915 m
HL_FiSlot = 0.0162915 m
Check_HLFiSlotBw :=
    "OK" if round(HL_FiBwSlotForward/m) == round(HL_FiSlot/m)
    "ERROR IN FILTER SLOTS HEAD LOSS ESTIMATION" otherwise
    = "OK"
# The round function was used in this particular check because there were issues with th eprecision of the two numbers which lead to an error even though the numbers were equal for upto 15 decimal places. In ordre to resolve this discrepancy, the numbers were rounded,
Check_FiBwSlot :=
    "OK" if Pi_FiBwSlotC < 0.4
    "ERROR IN FILTER BACKWASH SLOT LENGTH" otherwise
    = "OK"
Check_FiSlot :=
    "OK" if Pi_FiSlotC < 0.4
    "ERROR IN FILTER SLOT LENGTH" otherwise
    = "OK"
# Sedimentation Tank
# The starting point of analysis is the sedimentation tank exit weir
He_SedWeirExit = 1.7941 m
HL_SedLaunderBod = 0.04 m
HL_SedLaunderOrifice = 0.0379112 m
Z_SedWeirExitCheck := H_SedWeirExit + Z_SedChannelBottom - He_SedWeirExit = 0 m
He_SedExitChannel := He_SedWeirExit + HL_SedWeirExit = 1.81523 m
Z_SedExitChannelCheck := HW_SedExitChannel + Z_SedChannelBottom - He_SedExitChannel = -2.22045e-16 m
H_Sed = 1.95523 m
H_SedExitChannel := H_SedInletChannel = 0.395281 m
HW_Sed = 1.85523 m
Z_SedExitChannel := H_SedExitChannel + Z_SedChannelBottom = 1.95523 m
HW_SedInletChannel + Z_SedChannelBottom = 1.85523 m
Z_SedInletChannel := Z_SedExitChannel = 1.95523 m
Check_SedExitChannel :=
    "OK" if He_SedExitChannel < Z_SedExitChannel
    "ERROR IN SEDIMENTATION TANK EXIT CHANNEL " otherwise
    = "OK"
He_SedTank := He_SedExitChannel + HL_SedLaunderOrifice = 1.85314 m
He_SedInletChannel := He_SedTank + HL_SedPlate + HL_SedDiffuser + HL_SedManifoldPort + HL_InletManifoldEnt + HL_InletManifoldElbow + HL_SedInletChannelMax = 1.86196 m
# This head is slightly higher than that of the sedimentation tank since we have accounted for all minor losses incurred in the system, which were not originally accounted for in the main design code.
HL_SedTankCalc := HL_SedPlate + HL_SedDiffuser + HL_SedManifoldPort + HL_InletManifoldEnt + HL_InletManifoldElbow + HL_SedInletChannelMax = 0.00882178 m
He_SedInletChannel - HW_Sed = 6.73299 mm
Check_SedTank :=
    "OK" if He_SedTank < H_Sed
    "ERROR IN SEDIMENTATION TANK  " otherwise
    = "OK"
Check_SedInletChannel :=
    "OK" if He_SedInletChannel < Z_SedInletChannel
    "ERROR IN SEDIMENTATION TANK INLET CHANNEL" otherwise
    = "OK"
# According to CEE 4540, the equations written below should yield the same result based on the same area of the bay that the diffuser is serving.
A_SedUpCheck := V_SedUpBod*W_SedBay = 0.0010668 m^2/s
A_SedDiffuserCheck := V_SedDiffuser*W_SedDiffuserOutlet = 0.00107527 m^2/s
Check_SedVelDiffuser :=
    "OK" if A_SedUpCheck == A_SedDiffuserCheck
    "ERROR IN THE AREA THAT EACH DIFFUSER IS SERVING " otherwise
    = "ERROR IN THE AREA THAT EACH DIFFUSER IS SERVING "
# Flocculator
# The hydaulic gradline for the flocculator starts at the exit port from the last floc channel which feeds into the sed inlet channel.
#
# Plant origin is the bottom of the sedimentation tank so we need to adjust absolute elevations based on plant origin if we use functions from the design code where elevations are relative to plant origin.
# Vertical Flocculator
H_SedInletChannel = 0.395281 m
H_FlocPort = [0.729999; 0.729999] m
W_FlocPort = [0.24546; 0.336537] m
H_FlocExitPortV := HW_FlocEnd - H_FlocPort[1] = 1.12523 m
HW_FlocEnd = 1.85523 m
i := last(W_FlocPort) = 1
W_SedInletChannel = 0.526537 m
H_FlocPort[1] = 0.729999 m
HL_FlocChannelPortV := (N_FlocChannels - 1)*K_PipeExit/(2*g)*(Q_Plant/(H_FlocPort[0]*W_FlocPort[0]))^2 = 0.000635192 m
HL_FlocExitPort := h_erect(Q_Plant, W_FlocPort[i], H_FlocExitPortV, K_PipeExit) = 0.00014222 m
HL_FlocExitPortCheck := K_PipeExit/(2*g)*(Q_Plant/(H_FlocExitPortV*W_FlocPort[i]))^2 = 0.00014222 m
h_eFlocV = 0.196512 m
# In the design tool, the total headloss through a vertical flocculator is taken as the head loss through the baffles only
HL_BafflesCheck := (N_FlocSpacesV*K_FlocBaffle/(2*g)*(Q_Plant/(S_FlocV*W_FlocChannel))^2) = 0.196512 m
HL_FlocTotalCheckV := HL_BafflesCheck + HL_FlocChannelPortV + HL_FlocExitPort = 0.19729 m
# This is slightly higher than the headloss determined in the design tool because it also accounts for the minor losses through the ports
# The height of the flocculator is the depth of water at the end of the flocculator plus the plant freeboard plus the headloss across the flocculator
He_FlocV := HW_FlocEnd
He_FlocV = 1.85523 m
H_Floc - HW_FlocEnd - H_PlantFreeboard - HL_FlocTotalCheckV = -0.000777412 m
# This will be negative when we are in the vertical flocculator flow range due to the slightly higher headloss obtained by the addition of headloss through the channel ports
Z_Check := H_Floc - HW_FlocEnd - H_PlantFreeboard - HL_Floc = 1.66533e-16 m
HGL_V := H_Floc - HW_FlocEnd - HL_FlocTotalCheckV = 0.0992226 m
HW_FlocStartV := HW_FlocEnd + HL_FlocTotalCheckV = 2.05252 m
Check_FlocculatorV :=
    "OK" if HW_FlocStartV < H_Floc or Q_Plant ≤ Q_PlantMaxLF
    "ERROR IN VERTICAL FLOCCULATOR  " otherwise
    = "OK"
# Horizontal Flocculator
HL_FlocH = 0.177946 m
HL_FlocChannelPortH := (N_FlocChannels - 1)*K_FlocBaffle/(2*g)*(Q_Plant/(H_FlocPort[0]*W_FlocPort[0]))^2 = 0.00158798 m
HL_FlocExitPortH := K_FlocBaffle/(2*g)*(Q_Plant/(H_FlocPort[i]*W_FlocPort[i]))^2 = 0.000844769 m
HL_TotalFlocH := HL_FlocH + HL_FlocChannelPortH + HL_FlocExitPortH = 0.180379 m
# This is higher than HL.FlocH because the headloss through the ports are also accounted for
HW_FlocStartH := HW_FlocEnd + HL_TotalFlocH = 2.03561 m
N_FlocSpacesTotalLF := sum(N_FlocChannelSpacesLF) + N_FlocObstaclesLF(Q_Plant)  # error: This value must be a matrix of scalar elements.
Check_FlocculatorH :=
    "OK" if HW_FlocStartH < H_Floc
    "ERROR IN HORIZONTAL FLOCCULATOR  " otherwise
    = "OK"
N_FlocChannelsLF = "null"
# Low Flow Flocculator | H.Floc is defined as H.Sed + h.eFlocLF
h_eFlocLFBaffle = "null"
HGL_LF := H_Floc - HW_FlocEnd - h_eFlocLF  # error: This value must be a scalar or a matrix.
h_eFlocLFBaffle2 := h_eFlocLF/N_FlocSpacesTotalLF  # error: This variable is undefined.
HW_FlocStartLF := HW_FlocEnd + h_eFlocLF  # error: This value must be a scalar or a matrix.
HL_FlocLF := h_eFlocLFBaffle2*N_FlocSpacesTotalLF  # error: This variable is undefined.
Check_FlocculatorLF :=
    "OK" if HW_FlocStartLF < H_Floc
    "ERROR IN LOW FLOW FLOCCULATOR  " otherwise  # error: This variable is undefined.
H_Sed = 1.95523 m
H_PlantFreeboard = 0.1 m
# Rapid Mix
# Normal Flow
HL_RMPipe = 0.0185803 m
ZW_RMPipe = 2.15626 m
L_Et0 :=
    L_Sed if L_EtCaptureEffectiveMin == "null"
    N_EtFullHopper*L_EtHopper + (N_EtFullHopper + 1)*T_EtHopperLedge + 2*(L_EtHopper/2 + ConRadius(ND_EtDrain) + S_Fitting) otherwise
    = 4.2398 m
L_Et :=
    L_Et0 if EN_EtGrit == 0 and EN_DoubleTrain == 0
    (L_Et0 + W_DCWalkway + 3*T_PlantWall + L_LfomChannel) if EN_EtGrit == 0 and EN_DoubleTrain == 1
    L_Et1 otherwise
    = 4.2398 m
Z_FlocTank := HW_Sed - HW_FlocEnd = 0 m
# Z.FlocTank is the elevation of the flocculator with respect to the bottom of the sed tank.
T_FlocChannelWall :=
    T_FlocBaffleRigidV if Q_Plant ≤ Q_PlantMaxLF
    T_FlocChannelWallMidFlow otherwise
    = 0.15 m
Floc_Origin := [
    Plant_Origin[0];
    Plant_Origin[1] + N_SedTanks*(W_Sed + T_SedWallDivider) + T_PlantWall - T_SedWallDivider;
    Plant_Origin[2] + Z_FlocTank
]
L_Floc :=
    W_FlocTankLF if Q_Plant ≤ Q_PlantMaxLF
    L_Sed otherwise
L_Floc = 7.48687 m
Et_Origin0 := [
    Plant_Origin[0] - L_Sed + L_Et;
    Floc_Origin[1] + {
        (N_FlocChannels*(W_FlocChannel + T_FlocChannelWall)) + W_EtWalkway + 2*T_PlantWall - T_FlocChannelWall if Q_Plant > Q_PlantMaxLF
        L_Floc + T_PlantWall + L_ChannelSlot + W_EtWalkway otherwise
    };
    Z_Et
] = [-3.24707; 6.0004; 1.42251] m
Et_Origin1 := [
    Plant_Origin[0] - L_Sed + L_Et;
    Floc_Origin[1] + (N_FlocChannels*(W_FlocChannel + T_PlantWall)) + W_EtWalkway + T_PlantWall;
    Z_Et
] = [-3.24707; 6.0004; 1.42251] m
Et_Origin :=
    Et_Origin0 if EN_EtGrit == 0
    Et_Origin1 otherwise
W_EtCapture := Q_Plant/V_EtUpMin/(L_Et0 - 1/2*L_EtHopper - (S_Fitting + ConRadius(ND_EtDrain))) = 0.780165 m
W_Et0 := max(W_EtMin, W_EtCapture) = 1.23818 m
W_Et :=
    W_Et0 if EN_EtGrit == 0
    W_Et1 otherwise
    = 1.23818 m
FlocCoupling_Origin := [
    Floc_Origin[0] + ConRadius(ND_RMPipe) + S_Fitting - L_Sed;
    Floc_Origin[1] + N_FlocChannels*W_FlocChannel + T_FlocChannelWall*(N_FlocChannels - 1) + SocketDepth(ND_RMPipe) - L_FlocCouplingExt;
    Floc_Origin[2] + outerradius(ND_RMPipe) + S_Fitting
]
RMElbow_Origin0 := [
    Plant_Origin[0] - L_Sed + S_Fitting + ConRadius(ND_RMPipe);
    Et_Origin[1] + W_Et - S_Fitting - ConRadius(ND_RMPipe) - ElbowRadius(ND_RMPipe);
    FlocCoupling_Origin[2]
]  # this is the upper elbow (connected to the LFOM)
RMElbow_Origin1 := [
    Plant_Origin[0] - L_Sed + S_Fitting + ConRadius(ND_RMPipe);
    Et_Origin[1] + W_Et - 2*S_Fitting - ConRadius(ND_RMPipe) - ElbowRadius(ND_RMPipe) - 2*ConRadius(ND_EtOverflowDrain);
    FlocCoupling_Origin[2]
]
RMElbow_Origin :=
    RMElbow_Origin0 if EN_EtGrit == 0
    RMElbow_Origin1 otherwise
    = [-7.28685; 6.65756; 0.186525] m
L_RMPipeVert := Z_EtTop - (RMElbow_Origin[2] + ElbowRadius(ND_RMPipe)) = 1.98873 m
# From the entrance tank autocad script, this length is the length of the vertical section of the entire LFOM/Rapid Mix pipe relative to the origin of the elbow.
L_RMPipeVertCheck := L_RMPipeVert + (RMElbow_Origin[2] + ElbowRadius(ND_RMPipe)) = 2.55626 m
# Just as an additional consistency check between the autocad script file and design file for the entrance tank/rapid mix, L_RMPipeVertCheck should always be equal to Z_EtTop.
# Our check is from the plant origin so we are correcting for that here.
ZW_RMPipeCheck := ZW_RMPipe + (H_Freefall + HL_Flowmeasure) = 2.45626 m
ZW_RMPipe = 2.15626 m
Check_RMPipe :=
    "OK" if ZW_RMPipeCheck < L_RMPipeVertCheck
    "ERROR IN RAPID MIX" otherwise
    = "OK"
# Super High Flow (RM Channel)
ZW_LfomChannel = 2.12279 m
ZW_RM = 2.15626 m
ZW_RMPipe = 2.15626 m
HL_RapidMix = 0.000556416 m
He_RMChannel := ZW_RM + HL_RapidMix = 2.15681 m
H_RMChannel = 0.45 m
HW_LfomChannel = 2.12279 m
Check_RMChannel :=
    "OK" if HW_RMChannel < HW_LfomChannel
    "ERROR IN RAPID MIX CHANNEL" otherwise
    = "OK"
# LFOM
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HL_Lfom = 0.2 m
B_LfomOrifices = 0.166667 m
HL_LfomCheck = 0.198417 m
Q_LfomActual(Q_Plant, HL_Lfom, D_Drill, 5, N_LfomOrifices) = 0.0199757 m^3/s
Q_LfomActual(Q_Plant, HL_LfomCheck, D_Drill, 5, N_LfomOrifices) = 0.0198833 m^3/s
HGL_Lfom := HL_Lfom - HL_LfomCheck = 0.00158333 m
He_LFOM :=
    (ZW_RM + H_Freefall + HL_Flowmeasure + HL_RMPipe) if EN_LfomPipe == 1
    ZW_LfomChannel + HL_Lfom + H_Freefall20 + HL_LfomChannel otherwise
    = 2.47484 m
ZW_LFOMCheck := H_Freefall + HL_Flowmeasure + ZW_RMPipe = 2.45626 m
Check_Lfom :=
    "OK" if He_LFOM < Z_EtTop
    "ERROR IN LFOM  " otherwise
    = "OK"
# Entrance Tank
ZW_Et = 2.45626 m
# Elevation of the maximum water level in the entrance tank (relative to plant datum) This freefall is a safety factor inside the lfom
Z_EtTop = 2.55626 m
# Elevation of the top of the entrance tank walls (includes freeboard)
H_EtHopper = 0.83375 m
HW_Et0 = 1.03375 m
H_Et0 = 1.13375 m
H_Et :=
    H_Et0 if EN_EtGrit == 0
    H_Et1 otherwise
    = 1.13375 m
HW_Et = 1.03375 m
Z_Et = 1.42251 m
He_EntranceTank := Z_Et + HW_Et = 2.45626 m
Check_EntranceTank :=
    "OK" if He_EntranceTank < Z_EtTop
    "ERROR IN ENTRANCE TANK  " otherwise
    = "OK"
# Overall Hydraulic Gradient
HL_PlantTotal := Z_EtTop - H_PlantFreeboard - Z_FiEntranceBottom = 1.80617 m
# HL.PlantTotal is the overall hydraulic gradient calculated in the design code and HL.PlantTotalCalc is the overall hydraulic gradient calculated by the Error Checking Code.
HL_PlantTotalCalc := He_EntranceTank - He_FiDistPipe = 1.80617 m
# The overall gradient can be checked by estimating the overall plant head loss. The starting point will be the head of water in the entrance tank and the ultimate point will be the water in the distribution pipe exiting from the filter exit box.
Check_ErrorCodeConsistency :=
    "OK" if HL_PlantTotal == HL_PlantTotalCalc
    "ERROR CHECKING CODE IS NOT CONSISTENT WITH DESIGN CODE" otherwise
    = "OK"
# Key Dimensions
# Entrance Tank
H_Et = 1.13375 m
HW_Et = 1.03375 m
Z_Et = 1.42251 m
ZW_Et = 2.45626 m
H_EtTop = 0.3 m
HW_EtMax = 1.5 m
Z_EtTop = 2.55626 m
Z_LfomOrifices = 2.27213 m
# Flocculator
H_Floc = 2.15174 m
HW_FlocEnd = 1.85523 m
Z_FlocTank = 0 m
L_Floc = 7.48687 m
H_FlocPort = [0.729999; 0.729999] m
W_FlocChannel = 0.45 m
N_FlocChannels = 2
# Sed Tanks
N_SedTanks = 3
W_Sed = 1.0668 m
HW_Sed = 1.85523 m
L_Sed = 7.48687 m
H_Sed = 1.95523 m
N_SedBays = 1
Z_SedSideSlopes = 0.78546 m
HW_SedInletChannel = 0.295281 m
W_SedExitChannel = 0.3485 m
H_SedExitChannel = 0.395281 m
W_SedInletChannel = 0.526537 m
HW_SedExitChannel = 0.255281 m
L_SedChannel = 3.5004 m
H_SedWeirExit = 0.23415 m
H_SedInletChannel = 0.395281 m
W_SedInletChannelPreWeir = 0.336537 m
Z_SedChannelBottom = 1.55995 m
H_SedWeirInlet = 0.27415 m
W_SedWeirInlet = 3.5004 m
# SRSF
HL_FiTerminal = 0.455621 m
N_FiLayer = 6
H_Fi = 4.64517 m
HL_FiBwInitiation = 1.48782 m
H_FiLayer = 0.2 m
L_Fi = 1.48239 m
HL_FiBwSS = 1.28782 m
W_Fi = 1.49957 m
N_Fi = 1
Z_FiBottom = -2.85464 m
H_FiSand = 1.30083 m
Z_FiTop = 1.79053 m
Z_FiSiphonCoupling = 0.785925 m
H_FiBottomLayer = 0.26 m
Z_FiSiphonInlet = -0.963563 m
HL_FiInletChannel = 0.000893459 m
L_FiInletChannel = 1.14744 m
Z_FiEntranceWeir = 1.64608 m
Z_FiEntranceBottom = 0.650086 m
Z_FiExitBottom = 0.650086 m
L_FiExit = 0.5183 m
# Results
# Stacked Rapid Sand Filter
Check_FiEntrance = "OK"
Check_FiExit = "OK"
Check_FiHL1 = "OK"
Check_FiHL2 = "OK"
Check_Fi = "OK"
Check_FiInletChannel = "OK"
Check_SedWeirExit = "OK"
Check_FiSiphon = "OK"
Check_FiSiphonPressure = "OK"
Check_HLFiSlotBw = "OK"
Check_FiBwSlot = "OK"
Check_FiSlot = "OK"
# Sedimentation Tank
Check_SedExitChannel = "OK"
Check_SedTank = "OK"
Check_SedInletChannel = "OK"
Check_SedVelDiffuser = "ERROR IN THE AREA THAT EACH DIFFUSER IS SERVING "
# Flocculator
Check_FlocculatorV = "OK"
Check_FlocculatorH = "OK"
Check_FlocculatorLF =  # error: This variable is undefined.  # Check.FlocculatorLF is only computed when the plant flow rate is in the low flow regime.
# Rapid Mix
Check_RMPipe = "OK"
Check_RMChannel = "OK"
# LFOM
Check_Lfom = "OK"
# Entrance Tank
Check_EntranceTank = "OK"
# Overall Hydraulic Gradient
Check_ErrorCodeConsistency = "OK"
