# DATED : April 13, 2014
Q_Plant := 20*l/s
Mod := 0
method := "EtFlocSedFi"
# Design Tool Expert Inputs
# [reference: ExpertInputs.xmcd]
# Expert Inputs
Country_EC := 0
Country_Check :=
    "OK" if Country_EC == Country
    "Error in Country " otherwise
Language_EC := 0
Language_Check :=
    "OK" if Language_EC == Language
    "Error in Language " otherwise
# Tabulated Constants
Rho_H2OEC := 1000*kg/m^3  # Density of water
Rho_H2O.Check :=
    "OK" if Rho_H2OEC == Rho_H2O
    "Error in Rho.H2O " otherwise
Nu_WaterEC := 1*10^-6*m^2/s  # The kinematic viscosity of water.
Nu_WaterCheck :=
    "OK" if Nu_WaterEC == Nu_Water
    "Error in Nu.Water " otherwise
Rho_FBEC := 1001*kg/m^3  # Density of Flocs
Rho_FBCheck :=
    "OK" if Rho_FBEC == Rho_FB
    "Error in Rho.FB " otherwise
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Pi_JetRoundEC := 0.4
# This is an empirically determined factor to make the equation
# correct.
Pi_JetRoundCheck :=
    "OK" if Pi_JetRoundEC == Pi_JetRound
    "Error in Pi.JetRound " otherwise
Pi_JetPlaneEC := .225
Pi_JetPlaneCheck :=
    "OK" if Pi_JetPlaneEC == Pi_JetPlane
    "Error in Pi.JetPlane " otherwise
Pi_VenaContractaOrificeEC := 0.63
Pi_VenaContractaOrificeCheck :=
    "OK" if Pi_VenaContractaOrificeEC == Pi_VenaContractaOrifice
    "Error in Pi.VenaContractaOrifice " otherwise
P_AtmEC := 1 atm
P_AtmCheck :=
    "OK" if P_AtmEC == P_Atm
    "Error in P.Atm " otherwise
Nu_AirEC := 12*mm^2/s  # needed for the filter drawing
Nu_AirCheck :=
    "OK" if Nu_AirEC == Nu_Air
    "Error in Nu.Air " otherwise
Rho_AirEC := 1.204*kg/m^3  # needed for the filter drawing
Rho_AirCheck :=
    "OK" if Rho_AirEC == Rho_Air
    "Error in Rho.Air " otherwise
# General Assumptions and Constants
Plant_OriginEC := [0; 0; 0]*m
Plant_OriginCheck :=
    "OK" if Plant_OriginEC == Plant_Origin
    "Error in Plant.Origin " otherwise
W_HumanMinEC := 0.45 m
W_HumanMinCheck :=
    "OK" if W_HumanMinEC == W_HumanMin
    "Error in W.HumanMin " otherwise
H_HumanAccessEC := 1.5 m  # The height of the walkway above the drain channel bottom so that someone can walk through the drain channel.
H_HumanAccessCheck :=
    "OK" if H_HumanAccessEC == H_HumanAccess
    "Error in H.HumanAccess" otherwise
acad_versionEC := 2008
acad_versionCheck :=
    "OK" if acad_versionEC == acad_version
    "Error in acad.version" otherwise
H_FreefallEC := 0.1 m
H_FreefallCheck :=
    "OK" if H_FreefallEC == H_Freefall
    "Error in H.Freefall" otherwise
H_PlantFreeboardEC := 0.1*m
H_PlantFreeboardCheck :=
    "OK" if H_PlantFreeboardEC == H_PlantFreeboard
    "Error in H.PlantFreeboard" otherwise
ND_SpacerPipeEC := 3/4*in
ND_SpacerPipeCheck :=
    "OK" if ND_SpacerPipeEC == ND_SpacerPipe
    "Error in ND.SpacerPipeEC" otherwise
S_FittingEC := 5 cm  # minimum space between fittings in a tank or fittings and the wall of the tank.
S_FittingCheck :=
    "OK" if S_FittingEC == S_Fitting
    "Error in S.FittingEC" otherwise
W_ChannelMinEC := 15 cm  # Minimum channel width for constructability
W_ChannelMinCheck :=
    "OK" if W_ChannelMinEC == W_ChannelMin
    "Error in W.ChannelMin" otherwise
Π_RectangularEC := 1/2  # Π.Rectangular is defined as the optimum "height over width ratio" (1/2) for a rectangular open channel
Π_RectangularCheck :=
    "OK" if Π_RectangularEC == Π_Rectangular
    "Error in Π.Rectangular" otherwise
HL_ChannelMaxEC := 5 cm
HL_ChannelMaxCheck :=
    "OK" if HL_ChannelMaxEC == HL_ChannelMax
    "Error in HL.ChannelMax" otherwise
EN_WaterEC := 0  # Equals 1 to draw boxes showing max water levels, 0 normally
EN_WaterCheck :=
    "OK" if EN_WaterEC == EN_Water
    "Error in EN.Water" otherwise
# If EN_Water is set to 1, this controls the filter operation mode for which water/sand elevations are drawn. 0 for terminal, 1 for clean bed, and 2 for backwash.
EN_FilterWaterEC := 2
EN_FilterWaterCheck :=
    "OK" if EN_FilterWaterEC == EN_FilterWater
    "Error in EN.FilterWater" otherwise
EN_DoubleTrainEC :=
    1 if Q_Plant ≥ 120*L/s
    0 otherwise
    = 0
EN_DoubleTrainCheck :=
    "OK" if EN_DoubleTrainEC == EN_DoubleTrain
    "Error in EN.DoubleTrain" otherwise
Q_PlantEC :=
    Q_Plant/2 if EN_DoubleTrain == 1
    Q_Plant otherwise
Q_PlantCheck :=
    "OK" if Q_PlantEC == Q_Plant
    "Error in Q.PlantEC" otherwise
# Flow Orifice Meter
Π_LfomorificeEC := 10  # Number of rows in lfom.  note: execution time of the lfom file exponentially increases with this number.
Π_LfomorificeCheck :=
    "OK" if Π_LfomorificeEC == Π_Lfomorifice
    "Error in Π.Lfomorifice" otherwise
Π_LfomSafetyEC := 1.5  # safety coefficient for lfom pipe diameter
Π_LfomSafetyCheck :=
    "OK" if Π_LfomSafetyEC == Π_LfomSafety
    "Error in Π.LfomSafety" otherwise
Π_LfomSafetyMinEC := 1.15
# minimum safety coefficient for lfom pipe diameter; only reduced between 55 L/s and 70 L/s - the intermediate zone between the using an LFOM pipe and an LFOM channel
Π_LfomSafetyMinCheck :=
    "OK" if Π_LfomSafetyMinEC == Π_LfomSafetyMin
    "Error in Π.LfomSafetyMin" otherwise
HL_NlfomEC := 40 cm  # head loss through nonlinear orifice meter (simple orifice)
HL_NlfomCheck :=
    "OK" if HL_NlfomEC == HL_Nlfom
    "Error in HL.Nlfom" otherwise
HL_LfomMinEC := 20 cm  # Minimum range of head loss through linear orifice meter
HL_LfomMinCheck :=
    "OK" if HL_LfomMinEC == HL_LfomMin
    "Error in HL.LfomMin" otherwise
HL_LfomMaxEC := 40 cm  # Maximum range of head loss through linear orifice meterto be used as needed for high flow plants.
HL_LfomMaxCheck :=
    "OK" if HL_LfomMaxEC == HL_LfomMax
    "Error in HL.LfomMax" otherwise
HL_CdcCoagEC := HL_LfomMin
HL_CdcCoagCheck :=
    "OK" if HL_CdcCoagEC == HL_CdcCoag
    "Error in HL.CdcCoag" otherwise
ND_LfomPipeMaxEC := 12 in
ND_LfomPipeMaxCheck :=
    "OK" if ND_LfomPipeMaxEC == ND_LfomPipeMax
    "Error in ND.LfomPipeMax" otherwise
S_LfomOrificesMinEC := 5 mm  # Difference between the height of the water in floc tank and the bottom set of holes on the linear flow orifice meter
S_LfomOrificesMinCheck :=
    "OK" if S_LfomOrificesMinEC == S_LfomOrificesMin
    "Error in S.LfomOrificesMin" otherwise
EN_LfomPipeEC :=
    0 if Q_Plant ≥ 70*L/s or EN_DoubleTrain == 1
    1 otherwise
    = 1  # Both of these assumptions were tested over a range of flow rates and found to give reasonable Lfom configurations.
EN_LfomPipeCheck :=
    "OK" if EN_LfomPipeEC == EN_LfomPipe
    "Error in EN.LfomPipe" otherwise
# Entrance Tank
EN_EtGritEC := 0  # 0 if we want hoppers, 1 otherwise
EN_EtGritCheck :=
    "OK" if EN_EtGritEC == EN_EtGrit
    "Error in EN.EtGrit" otherwise
EN_TwoInletsEC := 0  # 0 if there is only one inlet, 1 if there is two inlets
EN_TwoInletsCheck :=
    "OK" if EN_TwoInletsEC == EN_TwoInlets
    "Error in EN.TwoInlets" otherwise
AN_EtSlopeMaxEC := 45 deg  # Angle of the sloped walls of the entrance tank hoppers
AN_EtSlopeMaxCheck :=
    "OK" if AN_EtSlopeMaxEC == AN_EtSlopeMax
    "Error in AN.EtSlopeMax" otherwise
V_EtUpMinEC := 8*mm/s
V_EtUpMinCheck :=
    "OK" if V_EtUpMinEC == V_EtUpMin
    "Error in V.EtUpMin" otherwise
HW_EtMaxEC := 1.5 m  # Maximum total water depth of the entrance tank to ensure easy access to drain plugs
HW_EtMaxCheck :=
    "OK" if HW_EtMaxEC == HW_EtMax
    "Error in HW.EtMax" otherwise
S_EtFloatEC := 10 cm  # Extra space around the float (increase in effective diameter) to ensure that float has free travel
S_EtFloatCheck :=
    "OK" if S_EtFloatEC == S_EtFloat
    "Error in S.EtFloat" otherwise
Ti_EtDrainEC := 1 min
# Time required to have contents of one hopper drain. Note that during this time it is assumed that the water level in the entrance tank remains constant.
Ti_EtDrainCheck :=
    "OK" if Ti_EtDrainEC == Ti_EtDrain
    "Error in Ti.EtDrain" otherwise
EN_LinearFlowEC := 1  # 1 if using Lfom, zero if using nonlinear system
EN_LinearFlowCheck :=
    "OK" if EN_LinearFlowEC == EN_LinearFlow
    "Error in EN.LinearFlow" otherwise
E_MaxRMEC := 1*W/kg
E_MaxRMCheck :=
    "OK" if E_MaxRMEC == E_MaxRM
    "Error in E.MaxRM" otherwise
L_EtSupportEC := 40 cm
L_EtSupportCheck :=
    "OK" if L_EtSupportEC == L_EtSupport
    "Error in L.EtSupport" otherwise
L_FlocCouplingExtEC := 5 cm
L_FlocCouplingExtCheck :=
    "OK" if L_FlocCouplingExtEC == L_FlocCouplingExt
    "Error in L.FlocCouplingExt" otherwise
ε_RMGateEC := 0.5
ε_RMGateCheck :=
    "OK" if ε_RMGateEC == ε_RMGate
    "Error in ε.RMGate" otherwise
H_Freefall20EC := 20 cm
H_Freefall20Check :=
    "OK" if H_Freefall20EC == H_Freefall20
    "Error in H.Freefall20" otherwise
# Chemical Storage Tanks
EN_CoagEC := 1  # 0 is alum, 1 is PACl
EN_CoagCheck :=
    "OK" if EN_CoagEC == EN_Coag
    "Error in EN.Coag" otherwise
C_CoagDoseMaxEC := 80*mg/L
C_ChlorineDoseMaxEC := 2*mg/L
C_FilterCoagDoseMaxEC := .60*mg/L
C_CoagStockMaxEC := 200*gm/L
Ti_CoagStockEC := 30 hr
Ti_ChlorineStockEC := 30 hr
Ti_FilterCoagStockEC := 30 hr
C_ChlorineStockMaxEC := 15*gm/L
C_CoagDoseMaxCheck :=
    "OK" if C_CoagDoseMaxEC == C_CoagDoseMax
    "Error in C.CoagDoseMax" otherwise
C_ChlorineDoseMaxCheck :=
    "OK" if C_ChlorineDoseMaxEC == C_ChlorineDoseMax
    "Error in C.ChlorineDoseMax" otherwise
C_FilterCoagDoseMaxCheck :=
    "OK" if C_FilterCoagDoseMaxEC == C_FilterCoagDoseMax
    "Error in C.FilterCoagDoseMax" otherwise
C_CoagStockMaxCheck :=
    "OK" if C_CoagStockMaxEC == C_CoagStockMax
    "Error in C.CoagStockMax" otherwise
Ti_CoagStockCheck :=
    "OK" if Ti_CoagStockEC == Ti_CoagStock
    "Error in Ti.CoagStock " otherwise
Ti_ChlorineStockCheck :=
    "OK" if Ti_ChlorineStockEC == Ti_ChlorineStock
    "Error in Ti.ChlorineStock" otherwise
Ti_FilterCoagStockCheck :=
    "OK" if Ti_FilterCoagStockEC == Ti_FilterCoagStock
    "Error in Ti.FilterCoagStock" otherwise
C_ChlorineStockMaxCheck :=
    "OK" if C_ChlorineStockMaxEC == C_ChlorineStockMax
    "Error in C.ChlorineStockMax" otherwise
# This is the elevation difference between the outlet of the coagulant stock tanks and the water level in the constant head tank, which is set by the hydraulic head required to provide the desired max chemical flow rate through the float valve orifice in the CHT. It is treated as constant here to ensure a practical amount of space is left between the stock tanks and the CHT even when a float valve is selected which requires very little hydraulic head to deliver the required maximum chemical flow rate.
H_CoagTankAboveHeadTankEC := 30 cm
H_CoagTankAboveHeadTankCheck :=
    "OK" if H_CoagTankAboveHeadTankEC == H_CoagTankAboveHeadTank
    "Error in H.CoagTankAboveHeadTank" otherwise
B_StockOutletEC := 10 cm  # This is the distance from the bottom of the stock tanks to the outlets to allow space for solids to settle.
B_StockOutletCheck :=
    "OK" if B_StockOutletEC == B_StockOutlet
    "Error in B.StockOutlet" otherwise
S_ChemTankBorderEC := 15 cm  # Distance between a tank and the border of the platform
S_ChemTankBorderCheck :=
    "OK" if S_ChemTankBorderEC == S_ChemTankBorder
    "Error in S.ChemTankBorder" otherwise
FilterCoagEC := 0  # this variable is set to zero if filter coagulant is not being used
FilterCoagCheck :=
    "OK" if FilterCoagEC == FilterCoag
    "Error in FilterCoag" otherwise
# Chemical Dose Controller
# This is the estimated elevation difference between the water level in the constant head tank and the top of the entrance tank wall. The constant head tank water level is the same as the elevation of the outlet of the dosing tube when the lever arm is horizontal (zero flow). Therefore this height depends only on the hardware used to make the slider/drop tube assembly and to mount the lever arm to the entrance tank wall. Note that this will vary depending on hardware used, and is only defined here to calculate the elevation of the stock tanks, which can be approximate.
H_DoserAssemblyEC := 6.77 cm
H_DoserAssemblyCheck :=
    "OK" if H_DoserAssemblyEC == H_DoserAssembly
    "Error in H.DoserAssembly" otherwise
Π_LinearCdcErrorEC := 10 %
# Maximum error allowed between a linear flow vs tube head loss relationship and the actual performance (which is affected by non-linear minor losses), assuming calibration at the maximum flow rate
Π_LinearCdcErrorCheck :=
    "OK" if Π_LinearCdcErrorEC == Π_LinearCdcError
    "Error in Π.LinearCdcError" otherwise
K_CdcTubeEC := 2  # Estimated minor loss coefficient for the small-diameter flexible tubing using fittings that have larger ID than the tubing
K_CdcTubeCheck :=
    "OK" if K_CdcTubeEC == K_CdcTube
    "Error in K.CdcTube" otherwise
HL_CdcCoagEC = 0.2 m
# Maximum head loss through the small-diameter tubing, which corresponds to the variation in water levels in the entrance tank and the difference between the maximum and minimum elevation of the dosing tube outlet attached to the lever arm.
HL_CdcChlorineEC := 10 cm
# The maximum chlorine head loss is set to 10cm to keep the length of tubing low. This means that the chlorine doser will be calibrated with the 2 mg/L dose at the middle of the lever arm.
HL_CdcChlorineCheck :=
    "OK" if HL_CdcChlorineEC == HL_CdcChlorine
    "Error in HL.CdcChlorine" otherwise
H_CdcFloatvalveEC := 5 cm  # Estimated distance between fluid level in constant head tank and orifice for float valve
H_CdcFloatvalveCheck :=
    "OK" if H_CdcFloatvalveEC == H_CdcFloatvalve
    "Error in H.CdcFloatvalve" otherwise
# Chemical Dose Controller Dimensions (based on inserted drawings)
L_CdcLeverEC := 0.45 m  # assumed from Drew's drawing for now
L_CdcLeverCheck :=
    "OK" if L_CdcLeverEC == L_CdcLever
    "Error in L.CdcLever" otherwise
W_LeverArmEC := 0.0032 m
W_LeverArmCheck :=
    "OK" if W_LeverArmEC == W_LeverArm
    "Error in W.LeverArm" otherwise
D_CdcChtEC := 6 in
D_CdcChtCheck :=
    "OK" if D_CdcChtEC == D_CdcCht
    "Error in D.CdcCht" otherwise
H_LeverHoleEC := 0.0312 m - 0.0095/2*m
# Distance from the top of the entrance tank to the to the middle of the lever arm hole for the cable - (minus the) radius of the hole
H_LeverHoleCheck :=
    "OK" if H_LeverHoleEC == H_LeverHole
    "Error in H.LeverHole" otherwise
D_CableEC := 0.1 in
D_CableCheck :=
    "OK" if D_CableEC == D_Cable
    "Error in D.Cable" otherwise
D_LABOrigintoLAOriginZEC := 0.0254 m  # Edited DLABOrigintoLAOriginZ to accommodate dimensions from McMaster vs Inserted Drawing
D_LABOrigintoLAOriginZCheck :=
    "OK" if D_LABOrigintoLAOriginZEC == D_LABOrigintoLAOriginZ
    "Error in D.LABOrigintoLAOriginZ" otherwise
L_LAOriginToDtYEC := 0.7812 m  # Distance from the lever arm origin to the outside center of the top part of the drop tube in the y direction
L_LAOriginToDtYCheck :=
    "OK" if L_LAOriginToDtYEC == L_LAOriginToDtY
    "Error in L.LAOriginToDtY" otherwise
L_LAOriginToDtZEC := 0.0429 m  # Distance from the lever arm origin to the drop tube in the z direction
L_LAOriginToDtZCheck :=
    "OK" if L_LAOriginToDtZEC == L_LAOriginToDtZ
    "Error in L.LAOriginToDtZ" otherwise
L_LAOriginToDtCenterXEC := 0.0290 m  # Distance from the lever arm origin to the center of the drop tube in the x direction
L_LAOriginToDtCenterXCheck :=
    "OK" if L_LAOriginToDtCenterXEC == L_LAOriginToDtCenterX
    "Error in L.LAOriginToDtCenterX" otherwise
T_CdcReducerEC := 0.0095 m  # Measured from CDC research team's apparatus
T_CdcReducerCheck :=
    "OK" if T_CdcReducerEC == T_CdcReducer
    "Error in T.CdcReducer" otherwise
L_LAOriginToReducerXEC := 0.0290 m  # Distance from the lever arm origin to the center of the reducer in the x direction
L_LAOriginToReducerXCheck :=
    "OK" if L_LAOriginToReducerXEC == L_LAOriginToReducerX
    "Error in L.LAOriginToReducerX" otherwise
L_LAOriginToReducerYEC := 0.7315 m  # Distance from the lever arm origin to the outside center of the top part of the reducer in the y direction
L_LAOriginToReducerYCheck :=
    "OK" if L_LAOriginToReducerYEC == L_LAOriginToReducerY
    "Error in L.LAOriginToReducerY" otherwise
L_LAOriginToReducerCenterXEC := 0.0290 m  # Distance from the lever arm origin to the center of the reducer in the x direction
L_LAOriginToReducerCenterXCheck :=
    "OK" if L_LAOriginToReducerCenterXEC == L_LAOriginToReducerCenterX
    "Error in L.LAOriginToReducerCenterX" otherwise
L_LAOriginToReducerCenterYEC := 0.7919 m  # Distance from the lever arm origin to the center of the reducer in the y direction
L_LAOriginToReducerCenterYCheck :=
    "OK" if L_LAOriginToReducerCenterYEC == L_LAOriginToReducerCenterY
    "Error in L.LAOriginToReducerCenterY" otherwise
W_LBracketEC := 5/8*in
W_LBracketCheck :=
    "OK" if W_LBracketEC == W_LBracket
    "Error in W.LBracket" otherwise
L_LBracketEC := 1.5 in
L_LBracketCheck :=
    "OK" if L_LBracketEC == L_LBracket
    "Error in L.LBracket" otherwise
T_LBracketEC := .08 in
T_LBracketCheck :=
    "OK" if T_LBracketEC == T_LBracket
    "Error in T.LBracket" otherwise
R_LArmBarEC := 3/16*in
R_LArmBarCheck :=
    "OK" if R_LArmBarEC == R_LArmBar
    "Error in R.LArmBar" otherwise
L_SliderEC := 3 in
L_SliderCheck :=
    "OK" if L_SliderEC == L_Slider
    "Error in L.Slider" otherwise
ND_DropTubeEC := 1/2*in
ND_DropTubeCheck :=
    "OK" if ND_DropTubeEC == ND_DropTube
    "Error in ND.DropTube" otherwise
L_DropTubeEC := .61 m
L_DropTubeCheck :=
    "OK" if L_DropTubeEC == L_DropTube
    "Error in L.DropTube" otherwise
H_SliderEC := 5/8*in
H_SliderCheck :=
    "OK" if H_SliderEC == H_Slider
    "Error in H.Slider" otherwise
D_LArmBarEC := 3/8*in
D_LArmBarCheck :=
    "OK" if D_LArmBarEC == D_LArmBar
    "Error in D.LArmBar" otherwise
L_LArmBarEC := 4 in
L_LArmBarCheck :=
    "OK" if L_LArmBarEC == L_LArmBar
    "Error in L.LArmBar" otherwise
W_SliderEC := 3.2*10^-3*m
W_SliderCheck :=
    "OK" if W_SliderEC == W_Slider
    "Error in W.Slider" otherwise
H_LeverArmEC := 0.0254 m
H_LeverArmCheck :=
    "OK" if H_LeverArmEC == H_LeverArm
    "Error in H.LeverArm" otherwise
OD_CdcFittingEC := 5/32*in  # Outer diameter of fitting- measured from CDC research team's fitting
OD_CdcFittingCheck :=
    "OK" if OD_CdcFittingEC == OD_CdcFitting
    "Error in OD.CdcFitting" otherwise
ID_CdcFittingEC := 0.126 in  # Inner diameter of fitting- measured from CDC research team's fitting
ID_CdcFittingCheck :=
    "OK" if ID_CdcFittingEC == ID_CdcFitting
    "Error in ID.CdcFitting" otherwise
L_CdcFittingEC := 0.75 in  # Length of fitting - measured from CDC research team's fitting
L_CdcFittingCheck :=
    "OK" if ID_CdcFittingEC == ID_CdcFitting
    "Error in ID.CdcFitting" otherwise
# Flocculator
Q_PlantMaxLFEC := 3*L/s  # Prompts the transition to a low flow flocculator.
Q_PlantMaxLFCheck :=
    "OK" if Q_PlantMaxLFEC == Q_PlantMaxLF
    "Error in Q.PlantMaxLF" otherwise
H_FlocOptionEC := 0
H_FlocOptionCheck :=
    "OK" if H_FlocOptionEC == H_FlocOption
    "Error in H.FlocOption" otherwise
K_FlocBaffleEC := 2.5
# The minor loss coefficient is 2. According to measurements at Agalteca and according to
# https://confluence.cornell.edu/display/AGUACLARA/PAHO+Water+Treatment+Publications (page 100 in chapter on flocculation)
K_FlocBaffleCheck :=
    "OK" if K_FlocBaffleEC == K_FlocBaffle
    "Error in K.FlocBaffle" otherwise
S_FlocBaffleSetBackPlasticEC := 2 cm
# Increased both to provide a safety margin on flocculator head loss and to simultaneously scale back on the actual collision potential we are trying to achieve.
S_FlocBaffleSetBackPlasticCheck :=
    "OK" if S_FlocBaffleSetBackPlasticEC == S_FlocBaffleSetBackPlastic
    "Error in S.FlocBaffleSetBackPlastic" otherwise
CP_FlocEC := 75 m^(2/3)  # increased to 100 at the request of Dan and Sarah
# value decreased 1/26/12
CP_FlocCheck :=
    "OK" if CP_FlocEC == CP_Floc
    "Error in CP.Floc" otherwise
Pi_JSOptimalEC := 3
Pi_JSOptimalCheck :=
    "OK" if Pi_JSOptimalEC == Pi_JSOptimal
    "Error in Pi.JSOptimal" otherwise
Pi_FlocBaffleMinEC := 1
Pi_FlocBaffleMinCheck :=
    "OK" if Pi_FlocBaffleMinEC == Pi_FlocBaffleMin
    "Error in Pi.FlocBaffleMin" otherwise
Pi_FlocBaffleMaxEC := 1.5
Pi_FlocBaffleMaxCheck :=
    "OK" if Pi_FlocBaffleMaxEC == Pi_FlocBaffleMax
    "Error in Pi.FlocBaffleMax" otherwise
ED_FlocEC :=
    10.5*mW/kg if EN_DoubleTrainEC == 0
    30*mW/kg otherwise
# Increased from 6 to 10 on 7/14/2011 to compensate for increase in Pi.Jet from 0.38 (in flocculator) and 0.34 (in ports, pipes, channels) to a new value of 0.4.
# Increased from 10 to 10.5 on 5/4/2011 for La Libertad
ED_FlocCheck :=
    "OK" if ED_FlocEC == ED_Floc
    "Error in ED.Floc" otherwise
Ti_FlocDrainEC := 30 min
Ti_FlocDrainCheck :=
    "OK" if Ti_FlocDrainEC == Ti_FlocDrain
    "Error in Ti.FlocDrain" otherwise
# Sedimentation Tank
L_SedEstEC := 4 m
ND_SedManifoldMinEC := 6 in  # Smallest size of manifold we will use because smaller manifolds create sed tanks that are too short?
ND_SedManifoldMaxEC := 8 in  # This might be reduced to a smaller pipe size to make the manifolds easier to manage.
N_SedTanksMinEC := 3
V_SedUpBodEC := 1*mm/s  # changed from 0.8 mm/s to 1 mm/s  on 8/13/2011 to obtain a better upflow velocity in the bottom of sed tanks for floc blankets.
V_SedCBodEC := 0.12*mm/s
AN_SedSlopeEC := 50 deg  # Angle of the sloped bottom of the sed tank. Changed from 60 to 50 on 8/13/2011 to reduce construction costs.
AN_SedHopperSlopeEC := 45 deg
HW_SedEstEC := 2 m
# Inlet Channel
Perpendicular_WeirEC := 0
Parallel_WeirEC := 1
Inlet_FullDepthEC := 2
ED_SedInletEC := ED_Floc
HL_SedWeirMaxEC := 5 cm
# Exit Launder
HL_SedLaunderBodEC := 4 cm  # target headloss in sed launders
Pi_QLaunderOrificesEC := 0.80
B_SedLaunderOrificesEstEC := 10 cm
L_SedLaunderCapExcess := 3 cm  # The additional length needed in the launder cap pipe that is to be inserted into the launder coupling
# Sludge Drain
Pi_QSludgeOrificesEC := 0.85
B_SedSludgeOrificesEstEC := 10 cm
Ti_SludgeDrainEC := 30 min
S_SedDrainCoverSegmentEC := 2 mm
# Plate Settler Modules
ND_SedModulePipeEC := 0.5 in  # Diameter of the pipe used to hold the lamina together
ND_SedModulePipeSpacerEC := 3/4*in  # Diameter of the ledge that serves as a ledge for the plate setter to lie on.
S_SedPlateModuleMinEC := 2 cm
# Floc Weir
H_SedSlopesToFlocWeirMinEC := 15 cm
H_FlocWeirToLamellaMinEC := 10 cm  # Vertical distance from the top of the floc weir to the bottom of the plates.
L_FlocHopperEstEC := 1 m
H_SedSlotDepthEC := 2 cm
# Stacked Rapid Sand Filter
# Construction and Design Inputs
# Design guidelines say 11 mm/s. The success of lab-scale backwashing at 10 mm/s suggests that this is a reasonable and conservative value
V_FiBwEC := 11*mm/s
N_FiLayerEC := 6
V_FiLayerEC := V_FiBw/N_FiLayer = 1.83333 mm/s
H_FiLayerMinEC := 20 cm  # Depth of each filter layer
B_FiManifoldBranchEC := 10 cm
L_FiManBranchExtEC := 2 cm  # How far the branch extends into the trunk line
Ti_FiBwInitiationBodEC := 3 min  # AKA time to drain the filter box of the water above the fluidized bed
HL_FiBwSFEC := 20 cm  # This is the extra head we are going to provide to ensure that we can initiate backwash.
HL_FiSiphonMaxEC := 20 cm  # Maximum acceptable head loss through the siphon at SS; used to calculate a diameter
ND_FiSandOutletEC := 2 in
H_FiDistBarrierEC := 10 cm
L_FiSiphonChannelStubMinEC := 20 cm
# Being able to shorten the stub from which the siphon discharges into the main plant drain channel allows for some flexibility in the hydraulic design.
HL_FiEntrancePipeMaxEC := 10 cm
ND_FiTrunkMaxEC := 6 in
W_FiInletChannelMinEC := 30 cm
# Elevation Safety Margins
H_FiBwNoSuckAirEC := 20 cm  # Minimum depth in the entrance box during backwash such that there is standing water over the inlet.
H_FiSiphonNoSuckAirEC := 10 cm  # Minimum depth over the orifices in the siphon manifold so that there is standing water and air is not entrained.
H_FiFluidizedBedToSiphonEC := 20 cm
H_FiForwardNoSuckAirEC := 10 cm
H_FiWeirFreefallEC := 3 cm
H_FiAirRemovalBlockSubmergedEC := 5 cm
H_FiBypassSafetyEC := 10 cm
H_DrainOutletSafetyEC := 10 cm
H_FiOverflowWeirFreefallEC := 10 cm
# Operator Access
W_MpWalkwayMinEC := 1*m  # combine walkway assumptions!
W_DCWalkwayEC := 1 m  # Width of the walkway above the main plant drain channel.
W_EtWalkwayEC := 1 m  # Width of the floor space between the flocculator and the rapid mix pipe floor cutout next to the entrance tank.
W_TrainWalkwayEC := 1.5 m  # for high flow, double train situations
# Minor Loss Coefficients
# Individual K Values | Expansions | Contractions
K_El90EC := 0.9  # 90 deg elbow
diamratio_exp0.75EC := 0
K_El45EC := 0.45
# The loss coefficient for the channel transition in a 90 degree turn
diamratio_cont0.75EC := 0
K_90EC := 0.4
diamratio_exp0.25EC := 0
diamratio_cont0.25EC := 0
K_AngleValveEC := 4.3
diamratio_cont0.5EC := 0
diamratio_exp0.5EC := 0
K_GlobeValveEC := 10
K_GateValveEC := 0.39
K_ChkValveConvEC := 4
K_ChkValveBallEC := 4.5
K_ExpEC := 1  # headloss coefficient of jet
K_TeeFlowRunEC := 0.6
K_TeeFlowBrEC := 1.8
K_RmLfomEC := 1  # Accounts for the exit into the flocculator from the straight Lfom.
K_PipeEntEC := 0.5  # K.ent is the K value for a pipe entrance
K_PipeExitEC := 1
K_SumEC(N_Elbow45, N_Elbow90, N_TeeRun, N_TeeBr, GateValve, GlobeValve, AngleValve, CheckValveConv, CheckValveBall) :=
    K_2 ← N_Elbow45*K_El45 + N_Elbow90*K_El90
    K_3 ← K_TeeFlowRun*N_TeeRun + K_TeeFlowBr*N_TeeBr
    K_4 ← GateValve*K_GateValve + GlobeValve*K_GlobeValve + AngleValve*K_AngleValve + CheckValveConv*K_ChkValveConv + CheckValveBall*K_ChkValveBall
    K_Sum ← K_2 + K_3 + K_4
    return K_Sum
K_FiEntrancePipeEC := K_El90 + K_PipeEnt + K_PipeExit = 2.4
K_RMGateVinEC := .25
# Drain Channels
Slope_PlantDCEC := 1 %
Slope_EtDCEC := 1 %
W_EtDCMinEC := 20 cm
# Results
Country_Check = "OK"
Language_Check = "OK"
# Tabulated Constants
Rho_H2O.Check = "OK"
Nu_WaterCheck = "OK"
Rho_FBCheck = "OK"
Pi_JetRoundCheck = "OK"
Pi_JetPlaneCheck = "OK"
Pi_VenaContractaOrificeCheck = "OK"
P_AtmCheck = "OK"
Nu_AirCheck = "OK"
Rho_AirCheck = "OK"
# General Assumptions and Constants
Plant_OriginCheck = "OK"
W_HumanMinCheck = "OK"
H_HumanAccessCheck = "OK"
acad_versionCheck = "OK"
H_FreefallCheck = "OK"
H_PlantFreeboardCheck = "OK"
ND_SpacerPipeCheck = "OK"
S_FittingCheck = "OK"
W_ChannelMinCheck = "OK"
Π_RectangularCheck = "OK"
HL_ChannelMaxCheck = "OK"
EN_WaterCheck = "OK"
EN_FilterWaterCheck = "OK"
EN_DoubleTrainCheck = "OK"
Q_PlantCheck = "OK"
# Flow Orifice Meter
Π_LfomorificeCheck = "OK"
Π_LfomSafetyCheck = "OK"
Π_LfomSafetyMinCheck = "OK"
HL_NlfomCheck = "OK"
HL_LfomMinCheck = "OK"
HL_LfomMaxCheck = "OK"
HL_CdcCoagCheck = "OK"
ND_LfomPipeMaxCheck = "OK"
S_LfomOrificesMinCheck = "OK"
EN_LfomPipeCheck = "OK"
# Entrance Tank
EN_EtGritCheck = "OK"
EN_TwoInletsCheck = "OK"
AN_EtSlopeMaxCheck = "OK"
V_EtUpMinCheck = "OK"
HW_EtMaxCheck = "OK"
S_EtFloatCheck = "OK"
Ti_EtDrainCheck = "OK"
EN_LinearFlowCheck = "OK"
E_MaxRMCheck = "OK"
L_EtSupportCheck = "OK"
L_FlocCouplingExtCheck = "OK"
ε_RMGateCheck = "OK"
H_Freefall20Check = "OK"
# Chemical Storage Tanks
EN_CoagCheck = "OK"
C_CoagDoseMaxCheck = "OK"
C_ChlorineDoseMaxCheck = "OK"
C_FilterCoagDoseMaxCheck = "OK"
C_CoagStockMaxCheck = "OK"
Ti_CoagStockCheck = "OK"
Ti_ChlorineStockCheck = "OK"
Ti_FilterCoagStockCheck = "OK"
C_ChlorineStockMaxCheck = "OK"
H_CoagTankAboveHeadTankCheck = "OK"
B_StockOutletCheck = "OK"
S_ChemTankBorderCheck = "OK"
FilterCoagCheck = "OK"
# Chemical Dose Controller
H_DoserAssemblyCheck = "OK"
Π_LinearCdcErrorCheck = "OK"
K_CdcTubeCheck = "OK"
HL_CdcCoagCheck = "OK"
HL_CdcChlorineCheck = "OK"
H_CdcFloatvalveCheck = "OK"
