# DATED : April 13, 2014
Q_Plant := 20*L/s
Mod := 0
method := "EtFlocSedFi"
# Design Tool Expert Inputs
# [reference: ExpertInputs.xmcd]
# Expert Inputs
Country_EC := 0
Language_EC := 0
# Tabulated Constants
Rho_H2OEC := 1000*kg/m^3  # Density of water
Nu_WaterEC := 1*10^-6*m^2/s  # The kinematic viscosity of water.
Rho_FB := 1001*kg/m^3  # Density of Flocs
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Pi_JetRound := 0.4
# This is an empirically determined factor to make the equation
# correct.
Pi_JetPlane := .225
Pi_VenaContractaOrifice := 0.63
P_Atm := 1 atm
Nu_Air := 12*mm^2/s  # needed for the filter drawing
Rho_Air := 1.204*kg/m^3  # needed for the filter drawing
Plant_Origin := [0; 0; 0]*m
W_HumanMin := 0.45 m
H_HumanAccess := 1.5 m  # The height of the walkway above the drain channel bottom so that someone can walk through the drain channel.
acad_version := 2008
H_Freefall := 0.1 m
H_PlantFreeboard := 0.1*m
ND_SpacerPipe := 3/4*in
S_Fitting := 5 cm  # minimum space between fittings in a tank or fittings and the wall of the tank.
W_ChannelMin := 15 cm  # Minimum channel width for constructability
Π_Rectangular := 1/2  # Π.Rectangular is defined as the optimum "height over width ratio" (1/2) for a rectangular open channel
HL_ChannelMax := 5 cm
EN_Water := 0  # Equals 1 to draw boxes showing max water levels, 0 normally
# If EN_Water is set to 1, this controls the filter operation mode for which water/sand elevations are drawn. 0 for terminal, 1 for clean bed, and 2 for backwash.
EN_FilterWater := 2
EN_DoubleTrainEC :=
    1 if Q_Plant ≥ 120*L/s
    0 otherwise
    = 0
Q_Plant :=
    Q_Plant/2 if EN_DoubleTrainEC == 1
    Q_Plant otherwise
# General Assumptions and Constants
Π_Lfomorifice := 10  # Number of rows in lfom.  note: execution time of the lfom file exponentially increases with this number.
Π_LfomSafety := 1.5  # sefety coefficient for lfom pipe diameter
Π_LfomSafetyMin := 1.15
# minimum safety coefficient for lfom pipe diameter; only reduced between 55 L/s and 70 L/s - the intermediate zone between the using an LFOM pipe and an LFOM channel
HL_Nlfom := 40 cm  # head loss through nonlinear orifice meter (simple orifice)
HL_LfomMin := 20 cm  # Minimum range of head loss through linear orifice meter
HL_LfomMax := 40 cm  # Maximum range of head loss through linear orifice meterto be used as needed for high flow plants.
HL_CdcCoag := HL_LfomMin
ND_LfomPipeMax := 12 in
S_LfomOrificesMin := 5 mm  # Difference between the height of the water in floc tank and the bottom set of holes on the linear flow orifice meter
# Both of these assumptions were tested over a range of flow rates and found to give reasonable Lfom configurations.
EN_LfomPipe :=
    0 if Q_Plant ≥ 70*L/s or EN_DoubleTrain == 1
    1 otherwise
    = 1
# Flow Orifice Meter
# Entrance Tank
EN_EtGrit := 0  # 0 if we want hoppers, 1 otherwise
EN_TwoInlets := 0  # 0 if there is only one inlet, 1 if there is two inlets
AN_EtSlopeMax := 45 deg  # Angle of the sloped walls of the entrance tank hoppers
V_EtUpMin := 8*mm/s
HW_EtMax := 1.5 m  # Maximum total water depth of the entrance tank to ensure easy access to drain plugs
S_EtFloat := 10 cm  # Extra space around the float (increase in effective diameter) to ensure that float has free travel
Ti_EtDrain := 1 min
# Time required to have contents of one hopper drain. Note that during this time it is assumed that the water level in the entrance tank remains constant.
EN_LinearFlow := 1  # 1 if using Lfom, zero if using nonlinear system
E_MaxRM := 1*W/kg
L_EtSupport := 40 cm
L_FlocCouplingExt := 5 cm
ε_RMGate := 0.5
H_Freefall20 := 20 cm
EN_Coag := 1  # 0 is alum, 1 is PACl
C_CoagDoseMax := 80*mg/L
C_ChlorineDoseMax := 2*mg/L
C_FilterCoagDoseMax := .60*mg/L
C_CoagStockMax := 200*gm/L
Ti_CoagStock := 30 hr
Ti_ChlorineStock := 30 hr
Ti_FilterCoagStock := 30 hr
C_ChlorineStockMax := 15*gm/L
# This is the elevation difference between the outlet of the coagulant stock tanks and the water level in the constant head tank, which is set by the hydraulic head required to provide the desired max chemical flow rate through the float valve orifice in the CHT. It is treated as constant here to ensure a practical amount of space is left between the stock tanks and the CHT even when a float valve is selected which requires very little hydraulic head to deliver the required maximum chemical flow rate.
H_CoagTankAboveHeadTank := 30 cm
B_StockOutlet := 10 cm  # This is the distance from the bottom of the stock tanks to the outlets to allow space for solids to settle.
S_ChemTankBorder := 15 cm  # Distance between a tank and the border of the platform
FilterCoag := 0  # this variable is set to zero if filter coagulant is not being used
# Chemical Storage Tanks
# Chemical Dose Controller
# This is the estimated elevation difference between the water level in the constant head tank and the top of the entrance tank wall. The constant head tank water level is the same as the elevation of the outlet of the dosing tube when the lever arm is horizontal (zero flow). Therefore this height depends only on the hardware used to make the slider/drop tube assembly and to mount the lever arm to the entrance tank wall. Note that this will vary depending on hardware used, and is only defined here to calculate the elevation of the stock tanks, which can be approximate.
H_DoserAssembly := 6.77 cm
Π_LinearCdcError := 10 %
# Maximum error allowed between a linear flow vs tube head loss relationship and the actual performance (which is affected by non-linear minor losses), assuming calibration at the maximum flow rate
K_CdcTube := 2  # Estimated minor loss coefficient for the small-diameter flexible tubing using fittings that have larger ID than the tubing
HL_CdcCoag = 0.2 m
# Maximum head loss through the small-diameter tubing, which corresponds to the variation in water levels in the entrance tank and the difference between the maximum and minimum elevation of the dosing tube outlet attached to the lever arm.
HL_CdcChlorine := 10 cm
# The maximum chlorine head loss is set to 10cm to keep the length of tubing low. This means that the chlorine doser will be calibrated with the 2 mg/L dose at the middle of the lever arm.
H_CdcFloatvalve := 5 cm  # Estimated distance between fluid level in constant head tank and orifice for float valve
# Chemical Dose Controller Dimensions (based on inserted drawings)
L_CdcLeverEC := 0.45 m  # assumed from Drew's drawing for now
L_CdcLeverCheck :=
    "OK" if L_CdcLeverEC == L_CdcLever
    "Error in L.CdcLever" otherwise
W_LeverArmEC := 0.0032 m
W_LeverArmCheck :=
    "OK" if W_LeverArmEC == W_LeverArm
    "Error in W.LeverArm" otherwise
D_CdcChtEC := 6 in
D_CdcChtCheck :=
    "OK" if D_CdcChtEC == D_CdcCht
    "Error in D.CdcCht" otherwise
H_LeverHoleEC := 0.0312 m - 0.0095/2*m
# Distance from the top of the entrance tank to the to the middle of the lever arm hole for the cable - (minus the) radius of the hole
H_LeverHoleCheck :=
    "OK" if H_LeverHoleEC == H_LeverHole
    "Error in H.LeverHole" otherwise
D_CableEC := 0.1 in
D_CableCheck :=
    "OK" if D_CableEC == D_Cable
    "Error in D.Cable" otherwise
D_LABOrigintoLAOriginZEC := 0.0254 m  # Edited DLABOrigintoLAOriginZ to accommodate dimensions from McMaster vs Inserted Drawing
D_LABOrigintoLAOriginZCheck :=
    "OK" if D_LABOrigintoLAOriginZEC == D_LABOrigintoLAOriginZ
    "Error in D.LABOrigintoLAOriginZ" otherwise
L_LAOriginToDtYEC := 0.7812 m  # Distance from the lever arm origin to the outside center of the top part of the drop tube in the y direction
L_LAOriginToDtYCheck :=
    "OK" if L_LAOriginToDtYEC == L_LAOriginToDtY
    "Error in L.LAOriginToDtY" otherwise
L_LAOriginToDtZEC := 0.0429 m  # Distance from the lever arm origin to the drop tube in the z direction
L_LAOriginToDtZCheck :=
    "OK" if L_LAOriginToDtZEC == L_LAOriginToDtZ
    "Error in L.LAOriginToDtZ" otherwise
L_LAOriginToDtCenterXEC := 0.0290 m  # Distance from the lever arm origin to the center of the drop tube in the x direction
L_LAOriginToDtCenterXCheck :=
    "OK" if L_LAOriginToDtCenterXEC == L_LAOriginToDtCenterX
    "Error in L.LAOriginToDtCenterX" otherwise
T_CdcReducerEC := 0.0095 m  # Measured from CDC research team's apparatus
T_CdcReducerCheck :=
    "OK" if T_CdcReducerEC == T_CdcReducer
    "Error in T.CdcReducer" otherwise
L_LAOriginToReducerXEC := 0.0290 m  # Distance from the lever arm origin to the center of the reducer in the x direction
L_LAOriginToReducerXCheck :=
    "OK" if L_LAOriginToReducerXEC == L_LAOriginToReducerX
    "Error in L.LAOriginToReducerX" otherwise
L_LAOriginToReducerYEC := 0.7315 m  # Distance from the lever arm origin to the outside center of the top part of the reducer in the y direction
L_LAOriginToReducerYCheck :=
    "OK" if L_LAOriginToReducerYEC == L_LAOriginToReducerY
    "Error in L.LAOriginToReducerY" otherwise
L_LAOriginToReducerCenterXEC := 0.0290 m  # Distance from the lever arm origin to the center of the reducer in the x direction
L_LAOriginToReducerCenterXCheck :=
    "OK" if L_LAOriginToReducerCenterXEC == L_LAOriginToReducerCenterX
    "Error in L.LAOriginToReducerCenterX" otherwise
L_LAOriginToReducerCenterYEC := 0.7919 m  # Distance from the lever arm origin to the center of the reducer in the y direction
L_LAOriginToReducerCenterYCheck :=
    "OK" if L_LAOriginToReducerCenterYEC == L_LAOriginToReducerCenterY
    "Error in L.LAOriginToReducerCenterY" otherwise
W_LBracketEC := 5/8*in
W_LBracketCheck :=
    "OK" if W_LBracketEC == W_LBracket
    "Error in W.LBracket" otherwise
L_LBracketEC := 1.5 in
L_LBracketCheck :=
    "OK" if L_LBracketEC == L_LBracket
    "Error in L.LBracket" otherwise
T_LBracketEC := .08 in
T_LBracketCheck :=
    "OK" if T_LBracketEC == T_LBracket
    "Error in T.LBracket" otherwise
R_LArmBarEC := 3/16*in
R_LArmBarCheck :=
    "OK" if R_LArmBarEC == R_LArmBar
    "Error in R.LArmBar" otherwise
L_SliderEC := 3 in
L_SliderCheck :=
    "OK" if L_SliderEC == L_Slider
    "Error in L.Slider" otherwise
ND_DropTubeEC := 1/2*in
ND_DropTubeCheck :=
    "OK" if ND_DropTubeEC == ND_DropTube
    "Error in ND.DropTube" otherwise
L_DropTubeEC := .61 m
L_DropTubeCheck :=
    "OK" if L_DropTubeEC == L_DropTube
    "Error in L.DropTube" otherwise
H_SliderEC := 5/8*in
H_SliderCheck :=
    "OK" if H_SliderEC == H_Slider
    "Error in H.Slider" otherwise
D_LArmBarEC := 3/8*in
D_LArmBarCheck :=
    "OK" if D_LArmBarEC == D_LArmBar
    "Error in D.LArmBar" otherwise
L_LArmBarEC := 4 in
L_LArmBarCheck :=
    "OK" if L_LArmBarEC == L_LArmBar
    "Error in L.LArmBar" otherwise
W_SliderEC := 3.2*10^-3*m
W_SliderCheck :=
    "OK" if W_SliderEC == W_Slider
    "Error in W.Slider" otherwise
H_LeverArmEC := 0.0254 m
H_LeverArmCheck :=
    "OK" if H_LeverArmEC == H_LeverArm
    "Error in H.LeverArm" otherwise
OD_CdcFittingEC := 5/32*in  # Outer diameter of fitting- measured from CDC research team's fitting
OD_CdcFittingCheck :=
    "OK" if OD_CdcFittingEC == OD_CdcFitting
    "Error in OD.CdcFitting" otherwise
ID_CdcFittingEC := 0.126 in  # Inner diameter of fitting- measured from CDC research team's fitting
ID_CdcFittingCheck :=
    "OK" if ID_CdcFittingEC == ID_CdcFitting
    "Error in ID.CdcFitting" otherwise
L_CdcFittingEC := 0.75 in  # Length of fitting - measured from CDC research team's fitting
L_CdcFittingCheck :=
    "OK" if ID_CdcFittingEC == ID_CdcFitting
    "Error in ID.CdcFitting" otherwise
Q_PlantMaxLFEC := 3*L/s  # Prompts the transition to a low flow flocculator.
Q_PlantMaxLFCheck :=
    "OK" if Q_PlantMaxLFEC == Q_PlantMaxLF
    "Error in Q.PlantMaxLF" otherwise
H_FlocOptionEC := 0
H_FlocOptionCheck :=
    "OK" if H_FlocOptionEC == H_FlocOption
    "Error in H.FlocOption" otherwise
# The minor loss coefficient is 2. According to measurements at Agalteca and according to
# https://confluence.cornell.edu/display/AGUACLARA/PAHO+Water+Treatment+Publications (page 100 in chapter on flocculation)
K_FlocBaffleEC := 2.5
K_FlocBaffleCheck :=
    "OK" if K_FlocBaffleEC == K_FlocBaffle
    "Error in K.FlocBaffle" otherwise
# Increased both to provide a safety margin on flocculator head loss and to simultaneously scale back on the actual collision potential we are trying to achieve.
S_FlocBaffleSetBackPlasticEC := 2 cm
S_FlocBaffleSetBackPlasticCheck :=
    "OK" if S_FlocBaffleSetBackPlasticEC == S_FlocBaffleSetBackPlastic
    "Error in S.FlocBaffleSetBackPlastic" otherwise
CP_FlocEC := 75 m^(2/3)  # increased to 100 at the request of Dan and Sarah
# value decreased 1/26/12
CP_FlocCheck :=
    "OK" if CP_FlocEC == CP_Floc
    "Error in CP.Floc" otherwise
Pi_JSOptimalEC := 3
Pi_JSOptimalCheck :=
    "OK" if Pi_JSOptimalEC == Pi_JSOptimal
    "Error in Pi.JSOptimal" otherwise
Pi_FlocBaffleMinEC := 1
Pi_FlocBaffleMinCheck :=
    "OK" if Pi_FlocBaffleMinEC == Pi_FlocBaffleMin
    "Error in Pi.FlocBaffleMin" otherwise
Pi_FlocBaffleMaxEC := 1.5
Pi_FlocBaffleMaxCheck :=
    "OK" if Pi_FlocBaffleMaxEC == Pi_FlocBaffleMax
    "Error in Pi.FlocBaffleMax" otherwise
ED_FlocEC :=
    10.5*mW/kg if EN_DoubleTrainEC == 0
    30*mW/kg otherwise
# Increased from 6 to 10 on 7/14/2011 to compensate for increase in Pi.Jet from 0.38 (in flocculator) and 0.34 (in ports, pipes, channels) to a new value of 0.4.
# Increased from 10 to 10.5 on 5/4/2011 for La Libertad
ED_FlocCheck :=
    "OK" if ED_FlocEC == ED_Floc
    "Error in ED.Floc" otherwise
Ti_FlocDrainEC := 30 min
Ti_FlocDrainCheck :=
    "OK" if Ti_FlocDrainEC == Ti_FlocDrain
    "Error in Ti.FlocDrain" otherwise
# Flocculator
# Sedimentation Tank
L_SedEstEC := 4 m
ND_SedManifoldMinEC := 6 in  # Smallest size of manifold we will use because smaller manifolds create sed tanks that are too short?
ND_SedManifoldMaxEC := 8 in  # This might be reduced to a smaller pipe size to make the manifolds easier to manage.
N_SedTanksMinEC := 3
V_SedUpBodEC := 1*mm/s  # changed from 0.8 mm/s to 1 mm/s  on 8/13/2011 to obtain a better upflow velocity in the bottom of sed tanks for floc blankets.
V_SedCBodEC := 0.12*mm/s
AN_SedSlopeEC := 50 deg  # Angle of the sloped bottom of the sed tank. Changed from 60 to 50 on 8/13/2011 to reduce construction costs.
AN_SedHopperSlopeEC := 45 deg
HW_SedEstEC := 2 m
# Inlet Channel
Perpendicular_WeirEC := 0
Parallel_WeirEC := 1
Inlet_FullDepthEC := 2
ED_SedInletEC := ED_Floc
HL_SedWeirMaxEC := 5 cm
# Exit Launder
HL_SedLaunderBodEC := 4 cm  # target headloss in sed launders
Pi_QLaunderOrificesEC := 0.80
B_SedLaunderOrificesEstEC := 10 cm
L_SedLaunderCapExcess := 3 cm  # The additional length needed in the launder cap pipe that is to be inserted into the launder coupling
# Sludge Drain
Pi_QSludgeOrificesEC := 0.85
B_SedSludgeOrificesEstEC := 10 cm
Ti_SludgeDrainEC := 30 min
S_SedDrainCoverSegmentEC := 2 mm
# Plate Settler Modules
ND_SedModulePipeEC := 0.5 in  # Diameter of the pipe used to hold the lamina together
ND_SedModulePipeSpacerEC := 3/4*in  # Diameter of the ledge that serves as a ledge for the plate setter to lie on.
S_SedPlateModuleMinEC := 2 cm
# Floc Weir
H_SedSlopesToFlocWeirMinEC := 15 cm
H_FlocWeirToLamellaMinEC := 10 cm  # Vertical distance from the top of the floc weir to the bottom of the plates.
L_FlocHopperEstEC := 1 m
H_SedSlotDepthEC := 2 cm
# Stacked Rapid Sand Filter
# Construction and Design Inputs
# Design guidelines say 11 mm/s. The success of lab-scale backwashing at 10 mm/s suggests that this is a reasonable and conservative value
V_FiBwEC := 11*mm/s
N_FiLayerEC := 6
V_FiLayerEC := V_FiBw/N_FiLayer = 1.83333 mm/s
H_FiLayerMinEC := 20 cm  # Depth of each filter layer
B_FiManifoldBranchEC := 10 cm
L_FiManBranchExtEC := 2 cm  # How far the branch extends into the trunk line
Ti_FiBwInitiationBodEC := 3 min  # AKA time to drain the filter box of the water above the fluidized bed
HL_FiBwSFEC := 20 cm  # This is the extra head we are going to provide to ensure that we can initiate backwash.
HL_FiSiphonMaxEC := 20 cm  # Maximum acceptable head loss through the siphon at SS; used to calculate a diameter
ND_FiSandOutletEC := 2 in
H_FiDistBarrierEC := 10 cm
L_FiSiphonChannelStubMinEC := 20 cm
# Being able to shorten the stub from which the siphon discharges into the main plant drain channel allows for some flexibility in the hydraulic design.
HL_FiEntrancePipeMaxEC := 10 cm
ND_FiTrunkMaxEC := 6 in
W_FiInletChannelMinEC := 30 cm
# Elevation Safety Margins
H_FiBwNoSuckAirEC := 20 cm  # Minimum depth in the entrance box during backwash such that there is standing water over the inlet.
H_FiSiphonNoSuckAirEC := 10 cm  # Minimum depth over the orifices in the siphon manifold so that there is standing water and air is not entrained.
H_FiFluidizedBedToSiphonEC := 20 cm
H_FiForwardNoSuckAirEC := 10 cm
H_FiWeirFreefallEC := 3 cm
H_FiAirRemovalBlockSubmergedEC := 5 cm
H_FiBypassSafetyEC := 10 cm
H_DrainOutletSafetyEC := 10 cm
H_FiOverflowWeirFreefallEC := 10 cm
# Operator Access
W_MpWalkwayMinEC := 1*m  # combine walkway assumptions!
W_DCWalkwayEC := 1 m  # Width of the walkway above the main plant drain channel.
W_EtWalkwayEC := 1 m  # Width of the floor space between the flocculator and the rapid mix pipe floor cutout next to the entrance tank.
W_TrainWalkwayEC := 1.5 m  # for high flow, double train situations
# Minor Loss Coefficients
# Individual K Values | Expansions | Contractions
K_El90EC := 0.9  # 90 deg elbow
diamratio_exp0.75EC := 0
K_El45EC := 0.45
# The loss coefficient for the channel transition in a 90 degree turn
diamratio_cont0.75EC := 0
K_90EC := 0.4
diamratio_exp0.25EC := 0
diamratio_cont0.25EC := 0
K_AngleValveEC := 4.3
diamratio_cont0.5EC := 0
diamratio_exp0.5EC := 0
K_GlobeValveEC := 10
K_GateValveEC := 0.39
K_ChkValveConvEC := 4
K_ChkValveBallEC := 4.5
K_ExpEC := 1  # headloss coefficient of jet
K_TeeFlowRunEC := 0.6
K_TeeFlowBrEC := 1.8
K_RmLfomEC := 1  # Accounts for the exit into the flocculator from the straight Lfom.
K_PipeEntEC := 0.5  # K.ent is the K value for a pipe entrance
K_PipeExitEC := 1
K_SumEC(N_Elbow45, N_Elbow90, N_TeeRun, N_TeeBr, GateValve, GlobeValve, AngleValve, CheckValveConv, CheckValveBall) :=
    K_2 ← N_Elbow45*K_El45 + N_Elbow90*K_El90
    K_3 ← K_TeeFlowRun*N_TeeRun + K_TeeFlowBr*N_TeeBr
    K_4 ← GateValve*K_GateValve + GlobeValve*K_GlobeValve + AngleValve*K_AngleValve + CheckValveConv*K_ChkValveConv + CheckValveBall*K_ChkValveBall
    K_Sum ← K_2 + K_3 + K_4
    return K_Sum
K_FiEntrancePipeEC := K_El90 + K_PipeEnt + K_PipeExit = 2.4
K_RMGateVinEC := .25
# Drain Channels
Slope_PlantDCEC := 1 %
Slope_EtDCEC := 1 %
W_EtDCMinEC := 20 cm
