# Low Flow AguaClara Design Tool
Q_Plant := □*L/s  # error: This placeholder is empty.  # This file should only be used for plant flow rates between 1L/s and 3L/s!
method := "EtFlocSedFiLow"
Mod := 0
## References
# MathCAD dimension calculations:
# [reference: ExpertInputs.xmcd]
Q_PlantMaxLF := 6*L/s
ND_DistPipe := 3 in
# [reference: MathFunctions.xmcd]
# [reference: PipeDatabase.xmcd]
# [reference: MaterialsDatabase.xmcd]
# [reference: FluidsFunctions.xmcd]
# [reference: CdcFunctions.xmcd]
# [reference: SedTankFunctions.xmcd]
# [reference: SedimentationTank.xmcd]
# [reference: Flocculator.xmcd]
# [reference: LFOM.xmcd]
# [reference: EntranceTank.xmcd]
# [reference: LFStackedRapidSandFilter_jsc377.xmcd]
# [reference: LinearCdc.xmcd]
# [reference: ChemStorageTanks.xmcd]
# AutoCAD drawing programs:
# Translators:
# These are the codes that take MathCAD outputs and create AutoCAD scripts that are used to draw the plant (formerly Basics)
# [reference: MtoATranslators.xmcd]
# The wrapped MtoA translator contains the functions that the user will want to access. These functions will draw pieces with full functionality - specifying the location, dimension, and orientation of the object. Also, it contains layer control and subtraction capabilities for grouped objects.
# [reference: MtoATranslatorsWrapped.xmcd]
# Drawing functions:
# [reference: ChannelF.xmcd]
# [reference: PlumbingF.xmcd]
# [reference: TankF.xmcd]
# [reference: StairsF.xmcd]
# [reference: DrainChannelF.xmcd]
# AutoCAD Script Files:
# [reference: FlocculatorAC abh35.xmcd]
# [reference: SedimentationTankACLow.xmcd]
# [reference: EntranceTankACLow.xmcd]
# [reference: ChemStockTanksACLow.xmcd]
# [reference: LowFlowStackedRapidSandFilterAC_jsc377.xmcd]
# [reference: CdcACLow.xmcd]
# [reference: OperatorAccessACLow.xmcd]
# [reference: MaterialsAC.xmcd]
# Materials List:
# [reference: MaterialsList.xmcd]
# Layouts:
# This file will execute at the very end to create multiple views of the entire plant in paperspace
# [reference: LayoutsAC.xmcd]
## All variables displayed must have the standard SI units. They may not have units attached by the user.
# General
Q_Plant = 0.004 m^3/s
Pi_VenaContractaOrifice = 0.63
T_PlantWall = 0.15 m
W_SedPlate = 1.06 m
T_ConcreteMin = 0.05 m
L_SedPlateSheet = 3 m
C_CoagStock = 200 kg/m^3
T_SedPlate = 0.002 m
Ti_CoagStock = 108000 s
T_SedWeir = 0.05 m
C_ChlorineStock = 15 kg/m^3
W_SedBay = 1.0668 m
Ti_ChlorineStock = 108000 s
HL_ChannelMax = 0.05 m  # Eliminate FCM variable from design specs
H_PlantFreeboard = 0.1 m
EN_DrillSeries = 0
# Entrance Tank
# Tank
HW_Et = 0.7 m
HW_EtMax = 1.5 m
H_Et = 0.8 m
Z_EtTop = 2.20072 m
L_Et = 2.9048 m
Z_Et = 1.40072 m
ZW_Et = 2.10072 m
W_Et = 1.1532 m
H_EtTop = 0.3 m  # height of the top part of the entrance tank above the hoppers
# Hoppers
H_EtHopperBack = 0.5 m
N_EtFullHopper = 1
H_EtHopper = 0.5 m
Z_EtHopper = 1.90072 m  # elevation of top of slab.
T_EtHopperLedge = 0.15 m
L_EtHopper = 1.2016 m
AN_EtSlope = 0.785398
# Rapid Mix
# Drain Channel
ED_Tee =  # error: This variable is undefined.
ND_RMPipe = 0.1016 m
W_EtDC = 0.3532 m  # drain channel under entrance tank dimensions
# Drains
L_EtDC = 2.67621 m
ND_EtDrain = 0.0762 m
H_EtDC = 0.152277 m  # Give heights of the channel at the beginning and end and change the design specs to explain that it's sloped.
L_EtDrainStopper = 0.796 m
# Flow measurement
ND_LfomPipe = 0.1016 m
HL_Flowmeasure = 0.2 m
Z_LfomOrifices = 1.90866 m  # elevation of the center of
HL_Lfom = 0.2 m
D_LfomOrifices = 0.015875 m
B_LfomRows = 0.02 m
N_LfomOrifices = [7; 2; 2; 2; 1; 2; 1; 1; 2; 0]
H_LfomOrifices = [0.0079375; 0.0279375; 0.0479375; 0.0679375; 0.0879375; 0.107938; 0.127937; 0.147937; 0.167938; 0.187937] m
# Trash Rack
B_EtRebar = 0.0233588 m
# Flow Control Valve | Other Parameters
# Overflow Weir
ND_EtFlowControl = 0.0508 m
V_EtUp = 0.00157435 m/s
W_EtOverflowSlot = 0.0489204 m
Ti_Et = 629.318 s
ND_EtOverflowDrain = 0.0762 m
H_EtOverflowCutaway = 0.0081534 m
L_EtOverflowWeir = 1.4032 m
W_PlantDC = 1 m
# Maybe give the vertical distances below the bottom of the sed tank of the beginning and end of the channel? Calculate them, display, and add to the design specs.
H_PlantDC =  # error
L_PlantDC = 5.03 m
H_HumanAccess = 1.5 m
# Plant Drain Channel
# Coagulant
Z_CoagTank = 2.46842 m
C_CoagStockMax = 200 kg/m^3
C_ChlorineStockMax = 15 kg/m^3
Z_CoagTankOutlet = 2.56842 m
C_CoagDoseMax = 0.08 kg/m^3
C_ChlorineDoseMax = 0.002 kg/m^3
L_CdcFloatArm = 0.41275 m
N_CdcCoagTubes = 1
N_CdcChlorineTubes = 1
L_CdcScaleArm = 0.50165 m
L_CdcCoagTube = 1.94304 m
L_CdcChlorineTube = 0.265406 m
B_StockOutlet = 0.1 m
HL_CdcCoag = 0.2 m
HL_CdcChlorine = 0.1 m
Ti_CoagStock = 108000 s
Vol_CoagTank = 208.198 L
Vol_ChlorineTank = 113.56 L
H_CoagTankAboveHeadTank = 0.3 m
D_CdcCoag = 0.003175 m
K_CdcTube = 2
D_CdcChlorine = 0.0015875 m
ND_EtFloat = 0.2032 m
Q_CoagStock = 1.6e-6 m^3/s
Q_ChlorineStock = 5.33333e-7 m^3/s
ND_CoagPiping = 0.0127 m
# Coag Dose Controller
# Tank
EN_FlocType :=
    "horizontal" if EN_FlocHoriz == 1
    "vertical" otherwise
H_Floc = 1.67 m
HW_FlocEnd = 1.54178 m
HW_FlocStart = 1.57 m
Z_FlocTank = 0.15 m
L_Floc = 4.83268 m
H_FlocPort = 0.745894 m
W_FlocChannel = 0.53 m
N_FlocChannels = 2
# Drains
ND_FlocValve =  # error
N_FlocValves = 1
H_FlocSlope =  # error
Ti_FlocDrain = 1800 s
# Parameters
ED_Floc = 0.01 m^2/s^3
CP_Floc = 75 m^(2/3)
Ti_Floc =  # error
G_Floc =  # error  # Look at Flocculator Positioning arrays
V_Floc =  # error
# Fill last channel with bafffles from last channel
ED_FlocMax =  # error  # Fix port width to be based on energy dissipation in that channel
# Adjust spacing after the number of baffles per channel is known.
ED_FlocAve =  # error
# Check the residence time of the flocculator should be at least 20minutes
HL_Floc = 0.0237761 m
K_FlocBaffle = 2.5
CP_Floc = 75 m^(2/3)
# Baffles
N_FlocChannelBaffles = [67; 62]
W_FlocPort = 0.0490983 m
S_FlocBaffle = 0.0690983 m
B_FlocBaffle = 0.0710983 m
L_FlocBaffleLower =  # error
Z_FlocBaffles =  # error
S_FlocBaffleFirst =  # error
L_FlocBaffleUpper =  # error
EN_FlocBaffle =  # error
T_FlocBaffle = 0.002 m
# Modules
ND_FlocModulesMain = 0.0127 m
ND_FlocModulesLarge = 0.0381 m
L_FlocModuleLong =  # error
L_FlocModuleShort =  # error
ND_SpacerPipe = 0.01905 m
L_FlocModuleLongOuter =  # error
# Flocculator
# Sed Tanks
N_SedTanks = 1
L_Sed = 4.83268 m
N_SedBays = 1  # Number of bays of inlet manifolds in each sed tank
Q_SedBay = 0.004 m^3/s
V_SedUpBod = 0.001 m/s  # design constraints
V_SedCBod = 0.00012 m/s
V_SedUp = 0.000963882 m/s  # Actual values from this design
W_SedSideSlopes = 0.511175 m
AN_SedSlope = 0.872665
Ti_Sed = 1662.55 s
# Sedimentation Tank Sludge Drain:
N_SedSludgeOrifices = 38  # per cell
Ti_SludgeDrain = 1800 s  # Tank Drain time
W_SedSludge = 0.0632861 m  # Width of the sludge channel
H_SedSludge = 0.0632861 m  # Depth of the sludge channel
# Distance center to center between drain orifices
B_SedSludgeOrifices = 0.102317 m
W_SedDrainCover = 0.103286 m
D_SedSludgeOrifice = 0.00972425 m  # Diameter of drain orifices
N_SedSludgeOrifices = 38
ND_SedSludgePipe = 0.0762 m
# Sedimentation Tank Dimensions:
Z_SedSludge = -0.137514 m  # Height from 0 of the top of the sludge drain
Z_SedSideSlopes = 0.716931 m
W_Sed = 1.0668 m  # Total tank wall height
L_Sed = 4.83268 m  # Total tank length
H_Sed = 1.79178 m
# Sedimentation Tank Inlet Channel:
EN_InletChannelGeom = 0
HW_SedInletChannel = 0.290108 m
W_SedInletChannel = 0.28415 m
L_SedChannel = 1.0668 m
H_SedInletChannel = 0.390108 m
HL_SedWeirInlet = 0.0385471 m
W_SedInletChannelPreWeir = 0.28415 m
H_SedWeirInlet = 0.310108 m
W_SedWeirInlet = 0.28415 m
# Sedimentation Tank Effluent Launder:
N_SedLaunderOrifices = 37  # Number of orifices per launder
Z_SedLaunder = 1.54375 m
Q_SedLaunderOrifices = 0.000108108 m^3/s
B_SedLaunderOrifices = 0.1 m  # Center to center launder spacing
# More Launder Dimensions
ND_SedLaunder = 0.1524 m
D_SedLaunderOrifice = 0.015875 m
L_SedLaunder = 3.96928 m
HL_SedLaunderOrifice = 0.0383222 m
# Sedimentation Tank Inlet Manifold:
ND_SedManifold = 0.1524 m
L_SedManifoldDiffuser = 0.0967643 m
Z_SedManifoldPipe = 0.281755 m
ND_SedDiffuser = 0.0254 m
D_SedManifoldPort = 0.0238125 m
B_SedManifoldPort = 0.05 m
N_SedManifoldPorts = 92
L_SedManifoldPipe = 4.59298 m
ED_SedInlet = 0.03 m^2/s^3
Q_SedManifoldPort = 5.26316e-5 m^3/s
# Exit Channel:
W_SedExitChannel = 0.3585 m
H_SedExitChannel = 0.390108 m
HW_SedExitChannel = 0.250108 m  # water height in exit channel from base of channel
H_SedWeirExit = 0.23415 m
# Lamella:
L_SedPlate = 0.5 m
B_SedPlate = 0.027 m  # center to center distance between lamella
S_SedPlate = 0.025 m  # spacing between lamella
N_SedPlates = 126  # Number of Sed Plates per Sedimentation Tank Bay.
N_SedModules = 14  # Number of modules per bay
N_SedModulePlates = 9  # Number of plates per module
AN_SedPlate = 1.0472
L_SedActive = 3.92598 m
Z_SedLaunder = 1.54375 m
HW_Sed = 1.69178 m
H_Sed = 1.79178 m
# SRSF
H_Fi = 4.42757 m
L_Fi = 0.682393 m
W_Fi = 0.647184 m
B_FiManifoldBranch = 0.1 m
ND_FiTrunk = 0.0762 m
ND_FiManBranch = 0.0254 m
ND_FiBwTrunk = 0.1016 m
ND_FiBwManBranch = 0.0381 m
ND_FiExitWaste = 0.0508 m
ND_FiBwWeirDrain =  # error
ND_FiBwDrain =  # error  # For the box that holds keeps the end of the siphon submerged
ND_FiSandOutlet = 0.0508 m
Ti_FiSand = 216.691 s  # This is the time required to empty the filter of the sand.
ND_FiSiphonAirValve = 0.009525 m
ND_FiSiphon = 0.1016 m
Q_FiSiphonMax =  # error
B_FiSiphonManOrifices = 0.138451 m
N_FiSiphonManOrifices = 4
D_FiSiphonManOrifices = 0.0508 m
Ti_FiBwInitiation =  # error
H_FiSand = 1.24083 m
N_FiLayer = 6
H_FiLayer = 0.2 m
V_FiLayer = 0.00183333 m/s
HL_FiTerminal = 0.455621 m
V_FiBw = 0.011 m/s
HL_FiBwInitiation = 1.42842 m
HL_FiBwSS = 1.22842 m
D_FiSand =  # error
N_Fi = 1
Q_Fi = 0.004 m^3/s
W_Slots =  # error
B_FiBwManSlot = 0.0047625 m
L_FiBwManSlot =  # error
B_FiManSlot = 0.0047625 m
L_FiManSlot =  # error
N_FiSlotRows = 2
Z_FiBottom = -2.83442 m
Z_FiTop = 1.59316 m
# Weirs
HL_FiWeir =  # error
L_FiWeir =  # error
Z_FiEntranceWeir = 1.46841 m
Z_FiBwWeir =  # error
Z_FiSiphonInlet = -1.02134 m  # This is the centerline elevation of the siphon orifices
Z_FiExitWeir =  # error
Z_FiExitBottom = 0.506664 m  # bottom of the filtered water box
Z_FiEntranceBottom = 0.506664 m  # bottom of the entrance box
Z_FiSiphonCoupling = 0.821938 m
Z_FiBwTop =  # error
W_FiBwDrain =  # error
H_FiBwDrain =  # error
N_Launders =  # error
L_LaunderPipeTotal =  # error
N_LaunderCouplings =  # error
N_ValveCouplings = 1
N_SedPlatesTotal = 126
N_SedPlatesPerSheet = 6
N_SedPlateSheets = 21
N_Valves = 1
A_EtFloor = 4.65722 m^2
W_FlocWithWalls = 1.36 m
L_FlocWithWalls = 5.13268 m
Vol_FlocFloor = 1162.55 L
A_FlocFloor = 7.75035 m^2
Vol_SedSlopes = 752.461 L
A_SedWalls =  # error
A_SedFloor = 7.01535 m^2
# Materials List
# Plant Summary Calculations:
HL_PlantTotal := Z_EtTop - H_PlantFreeboard - Z_FiExitWeir
HL_PlantTotal =  # error
## Display AC variables
AC_FlocTank =  # error
AC_OperatorAccess =  # error
AC_EntranceTank =  # no stored result
AC_SedTank =  # error
AC_ChemTanks =  # no stored result
AC_Filter =  # error
AC_ZZLayout := AC_Layout
AC_Cdc = [
    "-layer m CdcLayer"; "c t 0,0,0"; "CdcLayer"; "  "; "-layer m CdcAll"; "c t 214,214,214"; "CdcAll"; "  "; "_zoom w -1.81788,6.13492,2.17342 -1.72201,6.25505,2.29152"; "_box -1.77788,6.17695,2.21342 -1.76201,6.17492,2.25152"
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]  # AC_ZZMatApply
AC_ZZLayout =  # error
AI_EtFlocSedFiLow = [
    "laythw"; "_-view o t"; "-plot y "; "PublishToWeb PNG.pc3"; "User 1 (824.00 x 583.00 Pixels)"; "l n e F"; ""; " ."; "y  [FILEPATH]EtFlocSedFiLow_t"; "n y"
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]
AI_EtFlocSedFiLowSed = [
    "-group c * y "; "all "; "-layer s 0"; "  "; "-layer f *"; "  "; "-layer t *Sed*"; "  "; "-layer s *Sed*"; "  "
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]
AI_EtFlocSedFiLowFloc = [
    "-group c * y "; "all "; "-layer s 0"; "  "; "-layer f *"; "  "; "-layer t *Floc*"; "  "; "-layer s *Floc*"; "  "
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]
Q_Plant = 0.004 m^3/s
Plant := stack(AC_EntranceTank, AC_FlocTank, AC_SedTank, AC_OperatorAccess, AC_Cdc, AC_Filter, AC_ChemTanks)
# [component: inputs Plant]
