# AguaClara Design Tool
Q_Initial := 30*L/s
Q_Plant := 60*L/s
HL_FlocMax := 40 cm
H_SedSlopesToFlocWeirMin := 25 cm
T_FlocSlab := 15 cm
T_SedWall := 15 cm
T_SedDividingWall := 15 cm
T_SedChannelWall := 15 cm
T_FlocWall := 15 cm
T_FlocDividingWall := 15 cm
T_FiWall := 25 cm
T_FiBoxWall := 15 cm
T_PlantWall := 15 cm
T_PlantFloor := 20 cm
T_ChemSlab := 15 cm
T_DrainChannelWall := 15 cm
C_CoagDoseMax := 40*mg/L
C_ChlorDoseAve := 1*mg/L
method := "EtFlocSedFi"
Mod := 0
## References
# Mathcad to AutoCAD translators:
# [reference: MtoATranslators.xmcd]
# The wrapped MtoA translator contains the functions that the user will want to access. These functions will draw pieces with full functionality - specifying the location, dimension, and orientation of the object. Also, it contains layer control and subtraction capabilities for grouped objects.
# [reference: MtoATranslatorsWrapped.xmcd]
# Plant design calculations:
# [reference: ExpertInputs.xmcd]
# [reference: MathFunctions.xmcd]
# [reference: PipeDatabase.xmcd]
# [reference: MaterialsDatabase.xmcd]
# [reference: FluidsFunctions.xmcd]
# [reference: SedimentationTank.xmcd]
# [reference: SedimentationTankExpanded.xmcd]
# [reference: LFOM.xmcd]
# [reference: LFOMExpanded.xmcd]
# [reference: FlocculatorEntranceTank.xmcd]
# [reference: FlocculatorEntranceTankExpansion.xmcd]
# [reference: StackedRapidSandFilter.xmcd]
# [reference: ChemicalDoseController.xmcd]
# AutoCAD drawing functions:
# [reference: ChannelF.xmcd]
# [reference: PlumbingF.xmcd]
# [reference: TankF.xmcd]
N_FlocChannels = 4
# [reference: StairsF.xmcd]
# [reference: DrainChannelF.xmcd]
N_FlocChannels = 4
# AutoCAD script files:
# [reference: FlocculatorAC.xmcd]
# [reference: SedimentationTankAC.xmcd]
# [reference: EntranceTankCompactAC.xmcd]
# [reference: StackedRapidSandFilterAC.xmcd]
# [reference: ChemStockTanksAC.xmcd]
# [reference: OperatorAccessAC.xmcd]
# [reference: CdcAC.xmcd]
N_FlocChannels = 4
# Materials list:
# [reference: MaterialsList.xmcd]
# Layouts:
# This file will execute at the very end to create multiple views of the entire plant in paperspace
# [reference: LayoutsAC.xmcd]
# Section Cuts:
# This file will create section cuts in paper space... eventually
# weird stuff?
# [reference: SectionCutsAC.xmcd]
## All variables displayed must have the standard SI units. They may not have units attached by the user.
# General variables displayed
# Plant summary calculations
HL_PlantTotal := ZW_EtMax - Z_FiExitBottom
Q_Plant = 0.06 m^3/s
HL_PlantTotal = 2.36726 m
H_PlantFreeboard = 0.1 m
# Entrance tank variables displayed
# Tank
L_EtMax = 2.15343 m
H_Et = 2.61138 m
L_Et = 2.11207 m
W_Et = 0.61 m
H_EtApparent = 2.02311 m
AN_EtSlope1 = 0.872665
AN_EtSlope2 = 0.485831
# Parameters
V_EtCaptureBod = 0.008 m/s
V_EtCapture = 0.0079699 m/s
# Sedimentation plates
L_EtPlate = 0.8 m
L_EtTopPlate = 1.11108 m
N_EtPlates = 25
S_EtPlate = 0.025 m
AN_EtPlate = 0.872665
ND_EtMod = 0.0127 m
PS_EtModStr = "SDR 13.5"
ND_EtModSpacer = 0.01905 m
PS_EtModSpacerStr = "SDR 17"
ND_EtPlateSupport = 0.0762 m
PS_EtPlateSupportStr = "SDR 26"
T_EtPlate = 0.002 m
# Rapid mix
ND_RMPipe = 0.4572 m
PS_RMPipeStr = "SDR 41"
ED_RapidMix = 3 m^2/s^3
D_RMOrifice = 0.265747 m
HL_RMOrifice = 0.15032 m
HL_RMPipe = 0.00878642 m
L_FlocContact = -1.50391 m
H_FlocContact = 1.72802 m
Ti_FlocContact = -26.421 s
Pi_VCOrifice = 0.63
Pi_JetRound = 0.5
# Drains
ND_EtDrain = 0.1524 m
L_EtDrainStopper = 2.63837 m
PS_EtDrainStr = "SDR 41"
# Flow measurement
HL_Lfom = 0.2 m
D_LfomOrifices = 0.04445 m
B_LfomRows = 0.05 m
N_LfomOrifices = [21; 7; 6; 5]
H_LfomOrifices = [0.022225; 0.072225; 0.122225; 0.172225] m
N_LfomRows = 4
# Chemical dose controller variables displayed
H_CoagTankAboveHeadTank = 0.3 m
ND_EtFloat = 0.2032 m
HL_Cdc = 0.2 m
# Coagulant
ID_CoagTube = 0.003175 m
C_CoagStock = 150 kg/m^3
C_CoagDoseMax = 0.04 kg/m^3
Q_CoagMax = 1.6e-5 m^3/s
N_CoagTubes = 6
N_CoagTubesActive = 5
L_CoagTube = 1.06675 m
Vol_CoagStock = 2500 L
M_CoagSack = 25 kg
N_CoagSacks = 15
Nu_CoagStock = 1.31366e-6 m^2/s
ND_CoagColumn = 0.0254 m
ID_CoagColumn = 0.0266446 m
Ti_CoagColumnMin = 17.4244 s
H_CoagColumnScale = 0.5 m
D_CoagFloatValveOrifice = 0.0047498 m
HL_CoagFloatValveOrifice = 0.104744 m
# Chlorine
ID_ChlorTube = 0.003175 m
C_ChlorStock = 11.2894 kg/m^3
C_ChlorDoseMax = 0.002 kg/m^3
Q_ChlorMax = 1.06294e-5 m^3/s
N_ChlorTubes = 5
N_ChlorTubesActive = 4
L_ChlorTube = 1.7351 m
Vol_ChlorStock = 450 L
M_ChlorStock = 7.25748 kg
Nu_ChlorStock = 1e-6 m^2/s
ND_ChlorColumn = 0.01905 m
ID_ChlorColumn = 0.0209296 m
Ti_ChlorColumnMin = 16.1835 s
H_ChlorColumnScale = 0.5 m
D_ChlorFloatValveOrifice = 0.0047498 m
HL_ChlorFloatValveOrifice = 0.0462282 m
# Flocculator variables displayed
# Tank
H_Floc = 2.15227 m
L_Floc = 7.09277 m
W_FlocChannel = 0.61 m
W_FlocChannelMaxPlate = 1.06 m
W_FlocChannelMinPlate = 0.53 m
W_FlocChannelMin = 0.53 m
W_FlocChannelMinEfficient = 0.498757 m
N_FlocChannels = 4
HW_FlocEnd = 1.55466 m
T_FlocSlab = 0.15 m
Vol_Floc = 28722.9 L
H_FlocPort = 0.662726 m
W_FlocPort = 0.231385 m
# Drains
ND_FlocDrain = 0.0762 m
PS_FlocDrainStr = "SDR 26"
Q_FlocDrain = 0.0106381 m^3/s
# Parameters
HL_Floc = 0.497617 m
HL_FlocMax = 0.4 m
CP_Floc = 82.7564 m^(2/3)
V_Floc = 0.195638 m/s
ED_FlocAve = 0.012041 m^2/s^3
ED_FlocAveMinSettling = 0.005 m^2/s^3
ED_FlocMax = 0.024082 m^2/s^3
Ti_Floc = 478.715 s
Ti_FlocActive = 404.724 s
G_FlocAve = 109.732 1/s
GTheta_Floc = 44411
CP_FlocBod = 75 m^(2/3)
Alpha_EpsilonFloc = 2
Alpha_PsiFloc = 0.890899
Pi_JetPlane = 0.225
Ti_FlocDrain = 900 s
Pi_HSMin = 3
Pi_HSMax = 6
Pi_HSTransition = 5
K_FlocBaffle = 2.5
Pi_VCBaffle = 0.387426
Vol_FlocBod = 23399.7 L
W_FlocChannelCP = 0.600332 m
S_FlocBaffleMin = 0.266923 m
HL_FlocBod = 0.4 m
ED_FlocAveBod = 0.0100582 m^2/s^3
ED_FlocAveCP = 0.0100582 m^2/s^3
Ti_FlocMinCP = 389.995 s
Vol_FlocMinCP = 23399.7 L
ED_FlocAveMax = 0.0100582 m^2/s^3
Nu_Water = 1e-6 m^2/s
Vol_FlocMinChannels = 6251.3 L
# Baffles
S_FlocBaffle = 0.251385 m
T_FlocBaffle = 0.002 m
B_FlocBaffle = 0.253385 m
H_FlocBaffleLow = 1.30327 m
H_FlocBaffleHigh = 1.90089 m
S_FlocBaffleSetBackPlastic = 0.02 m
N_MiddleChannels = 0
N_FlocChannelBaffles = 27
N_FlocFirstChannelBaffles = 25
N_FlocLastChannelBaffles = 26
N_FlocBaffles = 51
N_FlocChannelSpaces = 28
ND_FlocMod = 0.0127 m
PS_FlocModStr = "SDR 13.5"
ND_FlocSpacer = 0.01905 m
PS_FlocSpacerStr = "SDR 17"
# Obstacles
ND_FlocObs = 0.1524 m
H_FlocObs = 0.777329 m
N_FlocSpaceExpansions = 2
N_FlocExpansions = 102
CP_FlocExpansion = 0.811338 m^(2/3)
PS_FlocObsStr = "SDR 41"
W_FlocObstacleWake = 0.153992 m
N_FlocSpaceObstacles = 1
# Sedimentation tank variables displayed
# General parameters
N_SedTanks = 10
Q_Sed = 0.006 m^3/s
V_SedUpBod = 0.001 m/s
# design constraints
V_SedCBod = 0.00012 m/s
V_SedUp = 0.00099161 m/s
# Actual values from this design
V_SedC = 0.00010735 m/s
Ti_Sed = 1486.19 s
# General dimensions
W_Sed = 1.06 m
L_Sed = 7.09277 m
H_Sed = 1.84911 m
HW_Sed = 1.74282 m
L_SedUpflow = 5.70827 m
W_SedSideSlopes = 0.489233 m
H_SedSideSlopes = 0.583045 m
H_SedFlocWeir = 0.833045 m
H_SedLamellaBottom = 0.981305 m
HW_Sed = 1.74282 m
AN_SedSlope = 0.872665
AN_SedHopperSlopeMin = 0.666405
# Inlet channel
HL_SedInletChannelMax = 0.00451316 m
HW_SedInletChannel = 0.500072 m
W_SedInletChannelPreWeir = 0.497962 m
W_SedInletChannelPostWeir = 0.15 m
W_SedInletChannel = 0.697962 m
L_SedChannel = 12.1 m
H_SedInletChannel = 0.600072 m
H_SedWeirInlet = 0.520072 m
HL_SedWeirInlet = 0.0192262 m
H_SedInletChannel = 0.600072 m
ND_SedChannelDrain = 0.1524 m
PS_SedChannelDrainStr = "SDR 41"
H_SedIChanStep = 0.0405063 m
H_SedIChanLastCoupling = 0.364556 m
HL_SedInlet =  # error: This variable is undefined.
# Exit channel
W_SedExitChannelPreWeir = 0.15 m
W_SedExitChannelPostWeir = 0.286538 m
W_SedExitChannel = 0.486538 m
H_SedExitChannel = 0.600072 m
H_SedWeirExit =  # error
H_SedExitChannel = 0.600072 m
HW_SedExitChannel = 0.453783 m
# Exit launder
HL_SedLaunderBod = 0.04 m
ND_SedLaunder = 0.1524 m
PS_SedLaunderStr = "SDR 41"
N_SedLaunderOrifices = 54
D_SedLaunderOrifice = 0.015875 m
L_SedLaunder = 5.68752 m
HL_SedLaunderOrifice = 0.0404807 m
B_SedLaunderOrificesEst = 0.1 m
B_SedLaunderOrifice = 0.105159 m
Pi_QLaunderOrifices = 0.8
# Inlet manifold
ND_SedManifold = 0.2032 m
PS_SedManStr = "SDR 41"
ND_SedDiffuser = 0.0254 m
PS_SedDiffuserStr = "SDR 26"
ND_SedJetReverser = 0.0762 m
PS_SedJetReverserStr = "SDR 26"
L_SedManifoldDiffuser = 0.15 m
N_SedManifoldPorts = 93
ED_SedInlet = 0.133503 m^2/s^3
Q_SedManifoldPort = 6.45161e-5 m^3/s
D_SedManifoldPort = 0.03175 m
B_SedDiffuser = 0.06 m
L_SedManHorizPipe2 = 5.63954 m
W_SedDiffuserInner = 0.003175 m
H_JetReverserToDiffusers = 0.03 m
HL_SedDiffuser = 0.0062888 m
# Plate settlers
L_SedActiveEst = 5.36038 m
L_SedPlate = 0.5 m
W_SedPlate = 1.06 m
T_SedPlate = 0.002 m
B_SedPlate = 0.027 m  # center to center distance between lamella
S_SedPlate = 0.025 m  # spacing between lamella
N_SedPlates = 176  # Number of plates per sedimentation tank
N_SedPlatesTotal = 1760  # Number of plates for the entire plant
N_SedModules = 22  # Number of modules per bay
N_SedModPlates = 8  # Number of plates per module
AN_SedPlate = 1.0472
ND_SedMod = 0.0127 m
PS_SedModStr = "SDR 13.5"
ND_SedModSpacer = 0.01905 m
PS_SedModSpacerStr = "SDR 17"
ND_SedPlateFrame = 0.0381 m
PS_SedPlateFrameStr = "SDR 26"
ND_SedHopperDrain = 0.0254 m
PS_SedHopperDrainStr = "SDR 26"
ND_SedToFiPipe = 0.2032 m
PS_SedToFiPipeStr = "SDR 41"
# Rapid sand filter variables displayed
# General parameters
Q_Fi = 0.02 m^3/s
N_Fi = 3
V_FiLayer = 0.00183333 m/s
V_FiBw = 0.011 m/s
HL_FiTerminal = 0.655621 m
HL_FiBwInitiation = 1.46252 m
HL_FiBwTotalSS = 1.68522 m
HL_FiCleanPath = 0.158659 m
# Filter box
H_Fi = 4.79083 m
L_Fi = 1.33826 m
W_FiMin = 1.41176 m
W_Fi = 1.57769 m
T_FiWall = 0.25 m
N_FiLayer = 6
H_FiLayer = 0.2 m
H_FiBottomLayer = 0.23 m
H_FiSand = 1.27528 m
# Auxiliary boxes
L_FiEntrance = 1.02516 m
W_FiEntrance = 1.05711 m
H_FiEntrance = 1.34775 m
L_FiExit = 0.5183 m
W_FiOverflow = 0.470577 m
L_FiOverflow = 0.925164 m
W_FiInletChannel = 0.398456 m
L_FiInletChannel = 4.7125 m
H_FiInletChannel = 0.5 m
# Pipe diameters
ND_FiBwTrunkMax = 0.2032 m
ND_FiTrunkMax = 0.1524 m
ND_FiTrunk = 0.1524 m
PS_FiTrunkStr = "SDR 26"
ND_FiBwTrunk = 0.2032 m
PS_FiInletOutletStr = "SDR 41"
PS_FiBwInletStr = "SDR 41"
ND_FiSandOutlet = 0.0508 m
PS_FiSandOutletStr = "SDR 26"
ND_FiSiphonAirValve = 0.01905 m
ND_FiSiphon = 0.2032 m
PS_FiSiphonStr = "SDR 41"
ND_FiTrunkFlushValve = 0.0381 m
ND_FiBwTrunkFlushValve = 0.0508 m
ND_FiExitWaste = 0.1016 m
PS_FiExitWasteStr = "SDR 26"
ND_FiEntOverflow = 0.1524 m
PS_FiEntOverflowStr = "SDR 41"
ND_FiInletChannelDrain = 0.2032 m
ND_FiManBranch = 0.0254 m
ND_FiBwManBranch = 0.0381 m
PS_FiBranchStr = "Sch 40"
ND_FiBranchHolder = 0.0508 m
PS_FiBranchHolderStr = "Sch 40"
ND_FiBypass = 0.2032 m
PS_FiBypassStr = "SDR 41"
# Siphon manifold
B_FiSiphonManOrifices = 0.0612068 m
N_FiSiphonManOrifices = 18
D_FiSiphonManOrifices = 0.0508 m
HL_FiSiphonMax = 0.35 m
# Manifolds
Pi_FiManifoldQ = 0.85
PR_FiManBranchEst = 0.008 m
N_FiManBranch = 26
B_FiManifoldBranch = 0.1 m
L_FiBwManBranch = 0.645014 m
L_FiManBranch = 0.670414 m
L_FiManBranchExt = 0.02 m
HL_FiBwSlotsEst = 0.1 m
A_FiBwManOrificesEst = 0.0194568 m^2
N_FiBwManOrifices = 260
N_FiBwManOrificesPerBranch = 10
D_FiBwManOrifice = 0.009525 m
B_FiBwManOrifice = 0.0616683 m
HL_FiBwManOrifice = 0.149707 m
HL_FiBwManOrificeForward = 0.0259908 m
PR_FiBwManTotal = 0.037666 m
N_FiInletManOrifices = 182
N_FiInletManOrificesPerBranch = 7
D_FiInletManOrifice = 0.015875 m
B_FiManOrificeEst = 0.05 m
B_FiInletManOrifice = 0.0967357 m
HL_FiInletManOrificeForward = 0.0274972 m
N_FiTopManOrifices = 260
N_FiTopManOrificesPerBranch = 10
D_FiTopManOrifice = 0.009525 m
B_FiTopManOrifice = 0.0644905 m
HL_FiTopManOrificeForward = 0.0259908 m
L_FiOutletBranchSlotted = 0.627239 m
N_FiSlotRows = 2
W_FiManSlots = 0.0002032 m
B_FiManSlot = 0.003175 m
N_FiOutletManSlotsPerRow = 197
N_FiOutletManSlotsPerBranch = 394
L_FiOutletManSlotCurvedInner = 0.0186942 m
A_FiOutletManSlots = 0.0389135 m^2
# Inlet weirs
Pi_QFiBw = 1.15
H_FiStopGate = 0.2 m
W_FiStopGate = 0.801436 m
W_FiBwFlowControl = 0.0348748 m
H_FiFlowControlSlotTotal = 0.693328 m
H_FiSlotStopper = 0.03 m
N_FiSlotStopper = 3
Q_FiSlotStopperIncrement = 0.00200409 m^3/s
HL_FiBwFlowControlSlot = 0.456383 m
HL_FiOpenWeirMax = 0.002 m
# Sand
D_FiSandES = 0.0005 m
Pi_UCFiSand = 1.65
D_FiSand60 = 0.000825 m
ε_FiSand = 0.4
Vol_FiSand = 6885.16 L
k_Kozeny = 5
Rho_FiSand = 2650 kg/m^3
## Display AC variables
AC_EntranceTank = [
    "-layer m EtCon";
    "c t 132,132,132";
    "EtCon";
    "  ";
    "_-view o t _zoom w -5.64139,14.22,0.15 -7.25277,15.15,2.76138";
    "_box -5.80139,14.38,0.15 -7.09277,14.99,2.76138 _box -5.65139,14.23,0 -7.24277,15.14,2.76138";
    "_subtract -5.65139,14.23,0  -5.80139,14.38,0.15 ";
    "_-view o t _zoom w -4.8207,14.22,2.02802 -5.81139,15.15,2.76138";
    "_box -4.9807,14.38,2.02802 -5.65139,14.99,2.76138 _box -4.8307,14.23,1.87802 -5.80139,15.14,2.76138";
    "_subtract -4.8307,14.23,1.87802  -4.9807,14.38,2.02802 "
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]
AC_FlocTank =  # no stored result
AC_OperatorAccess = [
    "-layer m OpWalkwayCon"; "c t 132,132,132"; "OpWalkwayCon"; "  "; "_box 0,0,1.00459 -13.37295,16.64,1.20459"; "-group c OpWalkwayCon y "; "all "; "-layer s 0"; "  "; "-layer f OpWalkwayCon"
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]
AC_SedTank =  # no stored result
AC_ChemTanks =  # no stored result
AC_Filter =  # no stored result
AC_SectionCuts = [
    "netload"; "sectioner"; "-view"; "o"; "t"; "laythw"; "-layer"; "n"; "long1,long2,trans1,trans2,trans3"; ""
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]
AC_Cdc =  # no stored result
AI_EtFlocSedFi = [
    "laythw"; "_-view o t"; "-plot y "; "PublishToWeb PNG.pc3"; "User 1 (824.00 x 583.00 Pixels)"; "l n e F"; ""; " ."; "y  [FILEPATH]EtFlocSedFi_t"; "n y"
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]
AI_EtFlocSedFiEt = [
    "-group c * y "; "all "; "-layer s 0"; "  "; "-layer f *"; "  "; "-layer t Et*"; "  "; "-layer s Et*"; "  "
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]
AI_EtFlocSedFiFloc = [
    "-group c * y "; "all "; "-layer s 0"; "  "; "-layer f *"; "  "; "-layer t Floc*"; "  "; "-layer s Floc*"; "  "
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]
AI_EtFlocSedFiSed = [
    "-group c * y "; "all "; "-layer s 0"; "  "; "-layer f *"; "  "; "-layer t Sed*"; "  "; "-layer s Sed*"; "  "
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]
AI_EtFlocSedFiFilter = [
    "-group c * y "; "all "; "-layer s 0"; "  "; "-layer f *"; "  "; "-layer t Fi*"; "  "; "-layer s Fi*"; "  "
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]
AI_EtFlocSedFiOp = [
    "-group c * y "; "all "; "-layer s 0"; "  "; "-layer f *"; "  "; "-layer t Op*"; "  "; "-layer s Op*"; "  "
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]
AI_EtFlocSedFiIsoX = ["shademode x"; "-group c * y "; "all "; "-layer s 0"; "  "; "-layer f *"; "  "; "-layer t *"; "  "; "-layer s *"; "  "; " "; "_-view se"; "-plot y "; "PublishToWeb PNG.pc3"; "User 1 (824.00 x 583.00 Pixels)"; "l n e F"; ""; " ."; "y  [FILEPATH]EtFlocSedFiFull_se"; "n y"]
AI_EtFlocSedFiCdc = [
    "-group c * y "; "all "; "-layer s 0"; "  "; "-layer f *"; "  "; "-layer t Cdc*"; "  "; "-layer s Cdc*"; "  "
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]
# Added 2/5/16 by mrf222
AI_Final = ["-view"; "swiso"; ""; "laythw"; "-view"; "o"; "t"]
