# Our goal is to allow for a plant built to a certain initial capacity (30 L/s, for example) to be able to eventually expand to a higher flow rate (say 60 L/s). With regards to the flocculator, this means that the concrete skeleton (number, width, and length of channels and length of entrance tank within first channel) must be constructed to account for the larger flow rate, since it is possible for a large flocculator to handle less flow but not possible for a small flocculator handle a larger flow rate and still obtain the required values of G, θ, and headloss.
# The paramters below are the 'Sample Inputs' found on the AguaClara design server for EtFlocSedFi. The changes to accomodate our code are Π_Expansion, which is 1 if the plant to be designed is to be constructed with our expansion-ready design and 0 if it will be not designed expansion-ready. Q_Initial is the flow rate that will initially be going through the plant, and Q_Plant is the maximum flow rate to which the plant can eventually be expanded (This value has a maximum of 60 L/s, which is the maximum amount of flow through one treatment train for an AguaClara design process).
# I have removed all references to make the code work with EtFlocSedFiExpanded. The variables in SampleInputs would go here, in addition to the  variables mentioned above.
# The references below give our code all of the inputs it needs to be able to function. If our code is deemed useful enough to be inserted into the AguaClara design code, this section would either be appended to the end of 'FlocculatorEntranceTank' or added as a new reference file after 'FlocculatorEntranceTank'
# I have removed all references to make the code work with EtFlocSedFiExpanded. The references above FlocculatorEntranceTankExpanded in EtFlocSedFiExpanded would go here.
# We encounter various problem when trying to ensure that our flocculator will always yield the correct amount of flocculation (constant G, θ, and headloss) for any flow rate. The primary concern is utilizing all of the space within the flocculator. Since θ == V/Q and the flow rate is changing, the only way to keep θ constant across all flow rates is to not utilize the entire volume of the flocculator. We have done this by including a 'contact chamber' of variable size (depending on the Q.Initial and Q.Plant) directly after the entrance tank. This contact chamber is merely a portion of the flocculator with nothing in it, no baffles and no obstacles. Based on the input flow rates, it can vary from occupying most the volume of the flocculator to not existing at all.
# Constants from  higher flow rate
# To ensure optimal (as far as we know) performance for a conventional hydraulic flocculator, the following values must remain constant between all flow rates. These parameters are (G, θ, ε, Gθ, HL).
GTheta_Floc =  # error: This variable is undefined.
G_FlocAve =  # error
Ti_FlocActive =  # error
HL_Floc =  # error
ED_FlocAve =  # error
# Shown below are the parameters of the flocculator that we have to work with. These values are all for the eventual plant flow rate to ensure that the flocculator will be large enough to function for the maximum flow rate. The challenge that this section attempts to solve is how to keep the strict parameters constant while working with the dimmensions of the flocculator that are fixed.
H_Floc =  # error
L_Floc =  # error
W_FlocChannel =  # error
N_FlocChannels =  # error
HW_FlocEnd =  # error
Vol_Floc =  # error
Q_Initial =  # error
# Obstacle spacing
# This section is exactly the same as the AguaClara Design code. However, it (and every other equation from here on) uses Q.Initial instead of Q.Plant to give the parameter value for the lower (intitial) flow. This section determines how many obstacles need to be added to each baffle to maintain Pi_HSMax = 6.
# Find the maximum distance between obstacles. In this analysis H is the distance between obstacles rather than the depth of water.
# The following equations:
HL_Floc == ε*θ/g
HL_Floc == K_FlocBaffle*V_Floc^2/(2*g)
V == Q_Initial/(W_FlocChannel*S_FlocBaffle)
Pi_HSMax == H_FlocObstableMax/S_FlocBaffle
θ == H_FlocObstableMax/V_Floc
# Are rearranged to determine this one. This equation calculates the height of the water in the flocculator that would be needed to achieve Pi_HSMax = 6if the only source of minor loss were the baffle
H_FlocObstacleMax := (K_FlocBaffle/(2*ED_FlocAveBod))^(1/4)*(Pi_HSMax*Q_Initial/W_FlocChannel)^(3/4)
# N.FlocSpaceExpansions and N.FlocSpaceObstacles determine the amount of expansions and obstacles necessary to rationalize the height of the water in the flocculator with Pi_HSMax .
N_FlocSpaceExpansions := ceil(HW_FlocEnd/H_FlocObstacleMax)
N_FlocSpaceObstacles := N_FlocSpaceExpansions - 1
# This number of obstacles includes the expansion created by the baffle. Calculates the distance between expansions.
H_FlocObs := HW_FlocEnd/N_FlocSpaceExpansions
# Baffle spacing
# This section will calculation the spacing of the baffles based on the following equations:
HL_Floc == ε*θ/g
HL_Floc == K_FlocBaffle*V_Floc^2/(2*g)
V == Q_Initial/(W_FlocChannel*S_FlocBaffle)
θ == H_FlocObstableMax/V_Floc
# And then will re-calculate the spacing based on ensuring that the the spacing of the baffles agrees geometrically with the length of the flocculator L_Floc.
# Note that in this equation we now use the distance between expansions as calculated above rather than the water depth for H.
S_FlocBaffleMin := (K_FlocBaffle/(2*H_FlocObs*ED_FlocAveBod))^(1/3)*(Q_Initial/W_FlocChannel)
# The following three equations find the amount of spaces and baffles that can fit into a channel given the spacing calculated directly above. Then it adjusts the spacing to ensure that the module of baffles fits evenly into the flocculator channel.
N_FlocChannelSpaces := Ceil((L_Floc + T_FlocBaffle)/(S_FlocBaffleMin + T_FlocBaffle), 2)
N_FlocChannelBaffles := N_FlocChannelSpaces - 1
S_FlocBaffle := (L_Floc - N_FlocChannelBaffles*T_FlocBaffle)/N_FlocChannelSpaces
# Number of Expansions Necessary Given Obstacle Number, Baffle Spacing, and Target Headloss
# This is where our code varries significantly from the design code. We now calculate the number of expansions needed in the flocculator to achieve our target headloss, our flow rate, and our baffle spacing. We then find the total number of baffles required by dividing the number of expansions by the number of expansions per flocculator space.
N_FlocExpansions := ceil(HL_Floc*W_FlocChannel^2*S_FlocBaffle^2*2*g/(K_FlocBaffle*Q_Initial^2))
N_BafflesNecessary := floor(N_FlocExpansions/N_FlocSpaceExpansions)
# Number of baffle spaces and expansions
# This section calculates the number of baffles in each channel. This is more complex than it is in the design code as a result of the variable number of channels that will actually hold baffles, and the fact that there will almost always be a channel that contains baffles, but is not completely filled with baffles.
# Last channel
# In most cases (every case in which the maximum expansion flow rate is high enough that 4 channels are required), the last flocculator channel will be filled with baffles. The first two lines of code shown below account for that. However, in the case where Q_Plant  reaches the largest flow rate for which 2 channels is appropriate and Q_Initial is around half of Q_Plant (40 L/s to 20 L/s, for example), then the final channel will not be entirely filled, and most of the code contained in a programming bar in this section is to solve that case.
N_FlocLastChannelSpaces := Floor((L_Floc - W_SedInletChannelPreWeir + T_FlocBaffle)/(S_FlocBaffle + T_FlocBaffle), 2)
N_FlocLastChannelBaffles := N_FlocLastChannelSpaces
# The following parameter outputs the amount of channels that will actually fit baffles.
N_FlocChannelsUsed := 1 + (N_BafflesNecessary - N_FlocLastChannelBaffles)/N_FlocChannelBaffles
N_FlocLastChannelSpaces :=
    N_FlocLastChannelSpaces ← N_BafflesNecessary if N_BafflesNecessary ≤ Floor((L_Floc - W_SedInletChannelPreWeir + T_FlocBaffle)/(S_FlocBaffle + T_FlocBaffle), 2)
    N_FlocLastChannelSpaces ← Floor((L_Floc - W_SedInletChannelPreWeir + T_FlocBaffle)/(S_FlocBaffle + T_FlocBaffle), 2) if N_BafflesNecessary > Floor((L_Floc - W_SedInletChannelPreWeir + T_FlocBaffle)/(S_FlocBaffle + T_FlocBaffle), 2)
    return N_FlocLastChannelSpaces
# As mentioned before, the code contained in the programming bar above will not doing anything most of the time. Only in special cases 2 channel -> 2 channel cases will it be used. Therefore, (N_FlocLastChannelSpaces, N_FlocLastChannelBaffles) will almost always be the same here as the are above.
N_FlocLastChannelSpaces =  # error
N_FlocLastChannelBaffles := N_FlocLastChannelSpaces
# First channel
# The 'First Channel' is not necessarily the same channel that contains the entrance tank. It is the first channel in which baffles are actually required. As a result, it will almost always not be entirely filled with baffles. The first line in the programming bar is used in the special 2 channel -> 2 channel case. The second uses the fraction of the channel required to contain baffles and multiplies it by the number of baffles that fit in a channel to obtain the number of baffles required in this channel.
N_FlocFirstChannelBaffles :=
    N_FlocFirstChannelBaffles ← 0 if N_FlocLastChannelBaffles == N_BafflesNecessary
    N_FlocFirstChannelBaffles ← Floor(mod(N_FlocChannelsUsed, 1)*N_FlocChannelBaffles, 2) + 1 if N_FlocLastChannelBaffles < N_BafflesNecessary
    return N_FlocFirstChannelBaffles
N_FlocFirstChannelSpaces := N_FlocFirstChannelBaffles
N_FlocFirstChannelBaffles =  # error
# Other Channels If Necessary
# If the Initial design flow rate and the eventual expansion flow rate are similar, there will not be much space required for the contact chamber. Therefore, there will need to be more channels than just the last and the first. These channels will all completely filled with baffles.
N_MiddleChannels :=
    Holder ← N_FlocChannelsUsed - mod(N_FlocChannelsUsed, 1) - 1
    N_MiddleChannels ← 0
    N_MiddleChannels ← Holder if Holder ≥ 0
    return N_MiddleChannels
N_MiddleChannels =  # error
N_FlocBaffles := N_FlocChannelBaffles
# Total
# N.FlocBaffles and N.FlocExpansions are re-defined to fit the actual geometry
N_FlocBaffles := N_FlocFirstChannelBaffles + N_FlocLastChannelBaffles + N_MiddleChannels*N_FlocBaffles
N_FlocExpansions := N_FlocBaffles*N_FlocSpaceExpansions
# Everything below this point has been copy-pasted from the FlocculatorEntranceTank AguaClara design code, the only difference is that Q_Initial has been used instead of Q_Train.
# Final parameters
N_FlocExpansions =  # error
# Collision potential
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CP_FlocExpansion := (K_FlocBaffle^2*H_FlocObs^4/(4*α_ε))^(1/6)
CP_Floc := N_FlocExpansions*CP_FlocExpansion
# Fluid velocity
# The fluid velocity is a traditional design target and thus we can compare our design with tradition.
V_Floc := Q_Initial/(S_FlocBaffle*W_FlocChannel)
V_MaxSchulz := 0.3*m/s
V_Max10State := 1.5*ft/s = 0.4572 m/s
V_MinSchulz := 0.1*m/s
V_Min10State := 0.5*ft/s = 0.1524 m/s
# Head loss
HL_Floc := K_FlocBaffle*V_Floc^2/(2*g)*N_FlocExpansions
# H/S ratio
Pi_FlocHSMin := H_FlocObs/S_FlocBaffle
# Geometry for the baffle spaces at the end of the flocculator where head loss hasn't accumulated (and for contractions below the top row in the case of additional obstacles, where head loss does not effect length of the expansion.
Pi_FlocHSMax := (H_FlocObs + HL_Floc)/S_FlocBaffle  # Geometry where head loss effects the length of the expansion
# Energy dissipation rate
ED_FlocAve := K_FlocBaffle/(2*H_FlocObs)*(Q_Initial/(W_FlocChannel*S_FlocBaffle))^3
ED_FlocMax := α_ε*ED_FlocAve
# Average velocity gradient
G_FlocAve := sqrt(ED_FlocAve/Nu_Water)
# Residence time
Vol_Floc := (N_FlocChannels*L_Floc - L_Et - T_FlocDividingWall)*W_FlocChannel*(HW_FlocEnd + HL_Floc/2)
Ti_Floc := Vol_Floc/Q_Train
Ti_FlocActive := (N_FlocChannels*L_Floc - L_Et - T_FlocDividingWall - (S_FlocBaffle*(N_FlocChannelSpaces - N_FlocLastChannelSpaces)))*W_FlocChannel*HW_FlocEnd/Q_Train
# G Theta
GTheta_Floc := G_FlocAve*Ti_FlocActive
# Obstacle design
# The obstacles will block the flow such that the contraction occupies Pi_VCBaffle =of the width of the space between the baffles.
W_FlocObstacleWake := S_FlocBaffle*(1 - Pi_VCBaffle)
# For half pipes, assume there is no vena contracta, so the un-blocked space should be equal to the width of the jet following the turn around a plate. The obstacles are the same for upflow and downflow spaces.
ND_FlocObs :=
    i ← 0
    ND_Obs ← AvailND[i]
    while W_FlocObstacleWake > 2*OR(ND_Obs)
        i ← i + 1
        ND_Obs ← AvailND[i]
    return ND_Obs
PS_FlocObs := SDR_41
PS_FlocObsStr := PSToString(PS_FlocObs)
# Flocculator dimensions
# Elevations
ZW_FlocEnd := Z_FlocBottom + HW_FlocEnd
ZW_FlocMax := ZW_FlocEnd + HL_Floc
Z_FlocTop := ZW_FlocMax + H_PlantFreeboard
Z_FlocLowBaffleTop := Z_FlocBottom + HW_FlocEnd - S_FlocBaffle*Pi_FlocBaffle
Z_FlocHighBaffleBottom := Z_FlocBottom + S_FlocBaffle*Pi_FlocBaffle
H_Floc := Z_FlocTop - Z_FlocBottom
HW_FlocMax := ZW_FlocMax - Z_FlocBottom
# Baffles
H_FlocBaffleLow := Z_FlocLowBaffleTop - Z_FlocBottom
H_FlocBaffleHigh := Z_FlocTop - Z_FlocHighBaffleBottom
B_FlocBaffle := S_FlocBaffle + T_FlocBaffle
# Ports
W_FlocPort := S_FlocBaffle - S_FlocBaffleSetBackPlastic
H_FlocPort := S_FlocBaffle*W_FlocChannel/W_FlocPort
W_Floc := N_FlocChannels*W_FlocChannel + (N_FlocChannels - 1)*T_FlocDividingWall
# Final entrance tank dimensions
# Plate settlers
N_EtPlates := fN_EtPlates(W_FlocChannel)
L_EtPlate := fL_EtPlate(W_FlocChannel)
L_EtTopPlate := L_EtPlate + L_EtTopPlateExtension
# Lengths
L_EtFrontWallToLfom := fL_EtFrontWallToLfom(W_FlocChannel)
L_EtFrontWallToFloat := fL_EtFrontWallToFloat(W_FlocChannel)
L_EtSlope1 := fL_EtSlope1(W_FlocChannel)
L_EtSlope2 := L_Et - L_EtSlope1 - OD_Fitting(ND_EtDrain) - S_Fitting/2
# Width
W_Et := W_FlocChannel
# Rapid mix
D_RMOrifice := D_PipeED(ED_RapidMix, Q_Train, Pi_VCOrifice, Pi_JetRound)
HL_RMOrifice := h_orifice(D_RMOrifice, Pi_VCOrifice, Q_Train)
HL_RMPipe := h_l(Q_Train, ID(ND_RMPipe, PS_RMPipe), 1 m, K_PipeExit, Nu_Water, E_Pvc)
D_RMOrificeSplit := D_PipeED(ED_RapidMix, Q_Train, Pi_VCOrifice, Pi_JetRound)
# mrf222 added for the multiple treatment train option
HL_RMOrificeSplit := h_orifice(D_RMOrifice, Pi_VCOrifice, Q_Train)
HL_RMPipeSplit := h_l(Q_Train, ID(ND_RMPipeSplit, PS_RMPipeSplit), 1 m, K_PipeExit, Nu_Water, E_Pvc)
T_EtUpperSlab := 15 cm
# Elevations and heights
Z_LfomBottom := ZW_FlocMax + HL_RMOrifice + HL_RMPipe + H_LfomFreefall
Z_EtUpperSlab := Z_LfomBottom - (CapHeight(ND_EtMod) + (N_EtPlates - 1)*(S_EtPlate + T_SedPlate))*cos(AN_EtPlate)
ZW_EtMax := Z_LfomBottom + HL_Lfom
Z_EtTop := ZW_EtMax + H_PlantFreeboard
H_Et := Z_EtTop - Z_FlocBottom
# This is not apparent depth, but if the entrance tank and flocculator share a slab it's the distance from the slab to the top of the entrance tank wall. The base of the entrance tank is then filled in (or left empty as a coagulant contact chamber).
H_EtUpper := Z_EtTop - Z_EtUpperSlab
H_EtSlope1 := L_EtSlope1*tan(AN_EtPlate)
Z_EtDrain := Z_EtUpperSlab - H_EtSlope1
H_EtSlope2 := min(Z_LfomBottom - Z_EtUpperSlab, L_EtSlope2*tan(AN_EtPlate))
H_EtDrain := Z_EtDrain - Z_FlocBottom
H_EtApparent := Z_EtTop - Z_EtDrain
Z_LfomBottomSplit := ZW_FlocMax + HL_RMOrificeSplit + HL_RMPipeSplit + H_LfomFreefall
Z_EtUpperSlabSplit := Z_LfomBottomSplit - (CapHeight(ND_EtMod) + (N_EtPlates - 1)*(S_EtPlate + T_SedPlate))*cos(AN_EtPlate)
ZW_EtMaxSplit := Z_LfomBottomSplit + HL_Lfom
Z_EtTopSplit := ZW_EtMaxSplit + H_PlantFreeboard
H_EtSplit := Z_EtTopSplit - Z_FlocBottom
H_EtUpperSplit := Z_EtTopSplit - Z_EtUpperSlabSplit
Z_EtDrainSplit := Z_EtUpperSlabSplit - H_EtSlope1
H_EtSlope2Split := min(Z_LfomBottomSplit - Z_EtUpperSlabSplit, L_EtSlope2*tan(AN_EtPlate))
H_EtDrainSplit := Z_EtDrainSplit - Z_FlocBottomSplit
H_EtApparentSplit := Z_EtTopSplit - Z_EtDrainSplit
# Slope angles
AN_EtSlope1 := AN_EtPlate
AN_EtSlope2 := atan(H_EtSlope2/L_EtSlope2)
AN_EtSlope2Split := atan(H_EtSlope2Split/L_EtSlope2)
# Real capture velocity
V_EtCapture := Q_Train/((N_EtPlates - 1)*W_Et*L_EtPlate*cos(AN_EtPlate))
V_EtCaptureSplit := Q_Train/((N_EtPlates - 1)*W_Et*L_EtPlate*cos(AN_EtPlate))
# Rapid mix contact space
# This is the space below the rapid mix outlet, before the first floc baffle, which provides contact time to finish micro-scale mixing of the coagulant.
L_FlocContact := L_Floc - N_FlocFirstChannelBaffles*(S_FlocBaffle + T_FlocBaffle) - L_Et - T_FlocDividingWall
H_FlocContact := Z_EtUpperSlab - Z_FlocBottom - T_EtUpperSlab
Vol_FlocContact := W_FlocChannel*L_FlocContact*H_FlocContact
Ti_FlocContact := Vol_FlocContact/Q_Train
H_FlocContactSplit := Z_EtUpperSlabSplit - Z_FlocBottom - T_EtUpperSlab
Ti_FlocContactSplit := Vol_FlocContact/Q_Train
# Floc channel drain
Q_FlocDrain :=
    Vol_Floc/(N_FlocChannels*Ti_FlocDrain) if N_FlocChannels < 2
    Vol_Floc/((N_FlocChannels - 1)*Ti_FlocDrain) otherwise
ND_FlocDrain := ND_PipeFlow(Q_FlocDrain, SDR_26, HW_FlocEnd/2, 0.5 m, Nu_Water, E_Pvc, K_PipeEnt + K_El90 + K_PipeExit)
PS_FlocDrain := PS_Decision(ND_FlocDrain)
PS_FlocDrainStr := PSToString(PS_FlocDrain)
# Chemical elevations
ZW_CdcCht := Z_EtTop + H_DoserAssembly
Z_CdcFloatValveOrifice := ZW_CdcCht + H_CdcFloatvalve
Z_CoagTankOutlet := Z_CdcFloatValveOrifice + H_CoagTankAboveHeadTank
Z_CoagTank := Z_CoagTankOutlet - B_StockOutlet
D_EtTrashRackHole := 1/2*in
S_EtTrashRackHoleMin := 1/4*in
N_EtTrashRackHolesHoriz := floor((W_Et - S_EtTrashRackHoleMin)/(D_EtTrashRackHole + S_EtTrashRackHoleMin))
S_EtTrashRackHole := (W_Et - N_EtTrashRackHolesHoriz*D_EtTrashRackHole)/(N_EtTrashRackHolesHoriz + 1)
N_EtTrashRackHolesVert := floor((HL_Lfom + L_EtPlate*sin(AN_EtPlate) - (T_SedPlate + T_Acrylic)*cos(AN_EtPlate) - S_EtTrashRackHole)/(D_EtTrashRackHole + S_EtTrashRackHole))
# Trash rack
# Conduction line size
ND_ConductionLine := ND_PipeFlow(Q_Train, SDR_26, 3 m, 0.5 m, Nu_Water, E_Pvc, 8*K_El90)
# Arbitrary sizing calculation that will give something close to expected condution line diameter
