# Linear Flow Orifice Meter Design File, Edited for Expansion
# Created by Adam Salwen (abs265@cornell.edu)
# Modified by Andrew Smith (abs249@cornell.edu) - Spring 2012
# Rewritten and simplified to eliminate iteration by Monroe - Spring 2012
S_LfomOrificesMin := 1 cm
# Expansion added Fall 2016
# Overview and design goals
# The linear flow orifice meter was developed in 2008 by the AguaClara team at Cornell University in Ithaca, NY. It maintains a linear relationship between the height of water in the entrance tank and the overall plant flow rate, allowing an operator to easily determine how much water is flowing through the plant at any given time. This task is accomplished by mimicking the theoretical stout weir, as will be described below.
#
# The LFOM made possible the development of an automatic chemical dose controller. This device utilizes the linear relationship between height and flow rate provided by the LFOM, and automatically doses the proper amount of coagulant to water leaving the entrance tank.
#
# Below, we describe the algorithm which designs the AguaClara LFOM and then develop this algorithm using Mathcad code.
# Designing the LFOM for expansion involves determining pipe size based on the expanded flow, and  calculating orifice sizes and locations based on the initial, smaller flow.  Head loss will be the same for both of these flows, and is as a result calculated based on the expanded flow. Regions highligted in light blue use initial flow as a parameter- all others use expanded flow.
# References and constants/variables needed for design
## References - used for design/testing purposes only, will be deleted
# LFOM Orifice: D.LfomOrifice refers to the diameter of a single orifice
# ND.LfomPipe refers to the nominal diameter of the pipe
# H.DMax is taken as the distance between the bottom of the bottom row of orifices to the limit of the linear relationship between flow and height
# The double train goes into effect over 60 lps. There are then 3 LFOMS-- one big and two smaller ones at each flocculator.
# mrf222 9/14/16
# LFOM riser pipe diameter calculation
## Stout weir overview/calculation of proportionality coefficient
# A stout weir is a theoretical flow control device in which weir width is proportional to 1/sqrt(height).
# It is not physically possible to fabricate such a device because the base would be infinitely wide. In practice, the sutro weir serves as a constructable alternative to the stout.We will use the Stout weir equation to model flow through the LFOM:
W_Stout == α/sqrt(z)  # assumed form of the weir
Q == α*sqrt(2*g)*Pi_VCOrifice*integral(sqrt(HL_Lfom - z)*1/sqrt(z), z = 0 .. HL_Lfom)  # based on V == sqrt(2*g*H)
integral(sqrt(HL_Lfom - z)*1/sqrt(z), z = 0 .. HL_Lfom) == π*HL_Lfom/2  # evaluate the integral
Q == α*sqrt(2*g)*Pi_VCOrifice*π*HL_Lfom/2  # simplified equation for flow
α == Q/(sqrt(2*g)*Pi_VCOrifice*π*HL_Lfom/2)  # solve for alpha
# Highlighted regions in light blue use initial flow
W_Stout == 2*Q/(sqrt(2*g*z)*Pi_VCOrifice*π*HL_Lfom)  # Width of the Stout weir
W_Stout(HL_Lfom, z) := 2/(sqrt(2*g*z)*Pi_VCOrifice*π*HL_Lfom)  # Width of Stout opening area as a function of height (per unit flow!!!)
W_Stout*B_LfomRows == 2*π*B_LfomRows^2/4
# This equation states that the open area corresponding to one row can be set equal to two orifices of diameter=row height. If there are more than two orifices per row at the top of the LFOM then there are more orifices than are convenient to drill and more than necessary for good accuracy. Thus this relationship can be used to increase the spacing between the rows and thus increase the diameter of the orifices.
# This spacing function also sets the lower depth on the high flow rate LFOM with no accurate flows below a depth equal to the first row height.
B_LfomRows == W_Stout*2/π
# These are function definitions-- ok to have Q.Plant or Q.Train as dummy variables.
# Should use head loss from small plant
N_LfomRows(Q_Plant, HL_Lfom) := min(10, max(4, trunc(HL_Lfom/(4*(W_Stout(HL_Lfom, HL_Lfom)*Q_Plant)/(2*π)))))
B_LfomRows == 2/π*2*Q/(sqrt(2*g*z)*Pi_VCOrifice*π*HL_Lfom)
# Should use flow and head loss for small flow
fB_LfomRows(Q_Plant, HL_Lfom) := HL_Lfom/N_LfomRows(Q_Plant, HL_Lfom)
## Calculation of average velocity in LFOM riser pipe
# Average velocity at the bottom of the riser pipe is calculated by weighting the velocity of falling water from each height sqrt(2*g*height) by the amount of flow at that height, and then dividing by the total mass flux to obtain the average velocity. This analysis is based on momentum conservation.
# Where does Qtotal come from?
V_zStout0 == integral(ρ*Q(z)*sqrt(2*g*z), z = 0 m .. HL_Lfom)/(ρ*Q_Total)
V_zStout0 == integral(ρ*V(z)*W(z)*Π_vc*sqrt(2*g*z), z = 0 m .. HL_Lfom)/(ρ*Q_Total)
V_zStout0 == integral(ρ*sqrt(2*g(HL_Lfom - z))*Q_Total/(sqrt(2*g*z)*Π_vc*π*HL_Lfom/2)*Π_vc*sqrt(2*g*z), z = 0 m .. HL_Lfom)/(ρ*Q_Total)
V_zStout0 == 2*sqrt(2*g)/(π*HL_Lfom)*2*HL_Lfom^(3/2)/3
V_zStout0 == 4/(3*π)*sqrt(2*g*HL_Lfom)
V_LfomPipe.Avg(HL_Lfom) := 4/(3*π)*sqrt(2*g*HL_Lfom)
# Note that the speed of falling water is 0.841 m/s for all linear flow orifice meters of height 20cm, independent of total plant flow rate.
## Final calculation of LFOM riser pipe diameter
# Average velocity at the bottom of the LFOM riser pipe must be slightly greater than what is given by Q.Plant/Area, so we apply a safety factor and solve for the minimum allowable LFOM cross-sectional area and diameter. This safety factor is given in expert inputs.
# Also, PVC pipes only come in certain sizes, so we must round up to the nearest available pipe size. This could result in an implicit addition to the given safety factor.
# These are function definitions-- ok to have Q.Plant or Q.Train as dummy variables.
A_LfomPipeMin(Q_Plant, HL_Lfom, Π_LfomSafety) := Π_LfomSafety*Q_Plant/V_LfomPipe.Avg(HL_Lfom)  # Area should be calculated based on overall flow
fND_LfomPipe(Q_Plant, HL_Lfom, Π_LfomSafety, PS) := ND_Min(2*sqrt(A_LfomPipeMin(Q_Plant, HL_Lfom, Π_LfomSafety)/π), PS)
# Nominal pipe diameter corresponding to the calculated minimum diameter
fHL_LfomHigh(Q_Plant, Π_LfomSafety, PS) :=
    i ← 0
    while fND_LfomPipe(Q_Plant, HL_LfomMin + i*5*cm, Π_LfomSafety, PS) > ND_LfomPipeMax and HL_LfomMin + i*5*cm < HL_LfomMax
        i ← i + 1
    return HL_LfomMin + i*5*cm
fHL_LfomHigh(Q_Plant, Π_LfomSafety, PS) :=
    i ← 0
    while fND_LfomPipe(Q_Plant, HL_LfomMin + i*5*cm, Π_LfomSafety, PS) > ND_LfomPipeMax and HL_LfomMin + i*5*cm < HL_LfomMax
        i ← i + 1
    return HL_LfomMin + i*5*cm
# HL.LfomMin and HL.LfomMax are both expert inputs
# QPlant only serves to determine the diameter, so this function may be adequate for our purposes.
fHL_LfomHigh(Q_Plant, Π_LfomSafety, PS) :=
    i ← 0
    while fND_LfomPipe(Q_Plant, HL_LfomMin + i*5*cm, Π_LfomSafety, PS) > ND_LfomPipeMax and HL_LfomMin + i*5*cm < HL_LfomMax
        i ← i + 1
    j ← 0
    while fND_LfomPipe(Q_Plant, HL_LfomMin + i*5*cm, Π_LfomSafety - j*0.05, PS) > ND_LfomPipeMax and Π_LfomSafety - j*0.05 > Π_LfomSafetyMin
        j ← j + 1
    return [HL_LfomMin + i*5*cm; (Π_LfomSafety - j*0.05)*m]
HL_Lfom := fHL_LfomHigh(Q_Plant, Π_LfomSafety, SDR_26)[0]  # Because Q.Plant only serves to calculate the diameter, it is okay to use expanded flow here.
Π_LfomSafety := fHL_LfomHigh(Q_Plant, Π_LfomSafety, SDR_26)[1]/m
V_LfomPipe.Avg(HL_Lfom) =  # error: This variable is undefined.
HL_LfomSplit := fHL_LfomHigh(Q_Train, Π_LfomSafety, SDR_26)[0]
Π_LfomSafetySplit := fHL_LfomHigh(Q_Train, Π_LfomSafety, SDR_26)[1]/m
V_LfomPipe.Avg(HL_LfomSplit) =  # error
# LFOM orifice diameter calculation
# The top row of orifices controls the rest of the design. We must ensure that the orifice area in the top row is smaller than the theoretical stout weir area, so that at least one orifice can be placed there.
# These are function definitions-- ok to have Q.Plant or Q.Train as dummy variables.
A_LfomOrificesTop(Q_Plant, HL_Lfom) := Q_Plant*integral(W_Stout(HL_Lfom, z), z = HL_Lfom - fB_LfomRows(Q_Plant, HL_Lfom) .. HL_Lfom)
# All of these should be calculated for small flow.
D_LfomOrificesTopMax(Q_Plant, HL_Lfom) := 2*sqrt(A_LfomOrificesTop(Q_Plant, HL_Lfom)/π)
fD_LfomOrifices(Q_Plant, HL_Lfom, D_Drill) := FloorNearest(min(fB_LfomRows(Q_Plant, HL_Lfom), D_LfomOrificesTopMax(Q_Plant, HL_Lfom)), D_Drill)
# Keep orifices as large as possible to make LFOM construction easier
fD_LfomOrifices(Q_Initial, HL_Lfom, D_Drill) =  # error
fD_LfomOrifices(Q_Train, HL_LfomSplit, D_Drill) =  # error
A_LfomOrifices(Q_Plant, HL_Lfom, D_Drill) := π*(fD_LfomOrifices(Q_Plant, HL_Lfom, D_Drill)/2)^2
# Generation of array containing LFOM orifice locations
N_LfomOrificesperRowMax(Q_Plant, Q_Initial, HL_Lfom, D_Drill, PS) := floor(π*ID(fND_LfomPipe(Q_Plant, HL_Lfom, Π_LfomSafety, PS), PS)/(fD_LfomOrifices(Q_Initial, HL_Lfom, D_Drill) + S_LfomOrificesMin))
# A bound on the number of orifices allowed in each row.  The distance between consecutive orifices must be enough to retain structural integrity of the pipe
N_LfomOrificesperRowMax(Q_Plant, Q_Initial, HL_Lfom, D_Drill, SDR_41) =  # error
# The numerator of this function should be the inner diameter of the entire pipe based on expanded flow, while the denominator, because it calculates orifice diameter should be calculated based on the smaller flow.
N_LfomOrificesperRowMax(Q_Train, HL_LfomSplit, D_Drill, SDR_41) =  # error
# locations where we will try to get the target flows is in between orifices at elevation Pi.H
Q_ramp(Q_Initial, HL_Lfom) := ramp(fB_LfomRows(Q_Initial, HL_Lfom), fB_LfomRows(Q_Initial, HL_Lfom), HL_Lfom)/HL_Lfom*Q_Initial  # Target riser flows
Q_ramp(Q_Initial, HL_Lfom) =  # error
fH_LfomOrifices(Q_Initial, HL_Lfom, D_Drill) := ramp(fD_LfomOrifices(Q_Initial, HL_Lfom, D_Drill)/2, fB_LfomRows(Q_Initial, HL_Lfom), HL_Lfom)
Q_ramp(Q_Train, HL_LfomSplit) =  # error
# Calculate the flow for a given number of submerged rows of orifices
Q_LfomActual(Q_Initial, HL_Lfom, D_Drill, RowIndexSubmerged, n_Lfomorifices) :=
    Q ← 0*L/min
    D_LfomOrifices ← fD_LfomOrifices(Q_Initial, HL_Lfom, D_Drill)
    for i ∈ 0 .. RowIndexSubmerged
        Q ← Q + n_Lfomorifices[i]*Q_orificeV(D_LfomOrifices, ramp(fB_LfomRows(Q_Initial, HL_Lfom), fB_LfomRows(Q_Initial, HL_Lfom), HL_Lfom)[RowIndexSubmerged] - ramp(D_LfomOrifices/2, fB_LfomRows(Q_Initial, HL_Lfom), HL_Lfom)[i], Pi_VCOrifice)
    return Q
# Calculate number of orifices at each level given a diameter
fN_LfomOrifices(Q_Initial, HL_Lfom, D_Drill, PS) :=
    Q_ramplocal ← Q_ramp(Q_Initial, HL_Lfom)
    D_LfomOrifices ← fD_LfomOrifices(Q_Initial, HL_Lfom, D_Drill)
    H_ramplocal ← ramp(D_LfomOrifices/2, fB_LfomRows(Q_Initial, HL_Lfom), HL_Lfom)
    n[last(H_ramplocal)] ← 0
    for i ∈ 0 .. last(H_ramplocal)
        n[i] ←
            min(max(0, round((Q_ramplocal[i] - Q_LfomActual(Q_Initial, HL_Lfom, D_Drill, i, n))/Q_orificeV(D_LfomOrifices, ramp(fB_LfomRows(Q_Initial, HL_Lfom), fB_LfomRows(Q_Initial, HL_Lfom), HL_Lfom)[i] - ramp(D_LfomOrifices/2, fB_LfomRows(Q_Initial, HL_Lfom), HL_Lfom)[i], Pi_VCOrifice))), N_LfomOrificesperRowMax(Q_Initial, HL_Lfom, D_Drill, SDR_41)) if fND_LfomPipe(Q_Initial, HL_Lfom, Π_LfomSafety, SDR_41) ≤ 12 in
            max(0, round((Q_ramplocal[i] - Q_LfomActual(Q_Initial, HL_Lfom, D_Drill, i, n))/Q_orificeV(D_LfomOrifices, ramp(fB_LfomRows(Q_Initial, HL_Lfom), fB_LfomRows(Q_Initial, HL_Lfom), HL_Lfom)[i] - ramp(D_LfomOrifices/2, fB_LfomRows(Q_Initial, HL_Lfom), HL_Lfom)[i], Pi_VCOrifice))) otherwise
    return n
# This function calculates the error of the design based on the differences between the predicted flow rate and the actual flow rate through the LFOM.
Q_LfomError(Q_Initial, HL_Lfom, D_Drill, PS) :=
    N_LfomOrifices ← fN_LfomOrifices(Q_Initial, HL_Lfom, D_Drill, SDR_41)
    for j ∈ 0 .. last(N_LfomOrifices)
        Q_LfomError[j] ← (Q_LfomActual(Q_Initial, HL_Lfom, D_Drill, j, N_LfomOrifices) - Q_ramp(Q_Initial, HL_Lfom)[j])/Q_Initial
    return Q_LfomError
# This funciton returns the maximum error, the absolute value of the errors is take into account positive and negative errors.
Q_LfomErrorMax := max(sqrt(Q_LfomError(Q_Initial, HL_Lfom, D_Drill, SDR_41)^2))
H_Graph := 0 cm, 0.5 cm .. HL_Lfom
Q_LfomIdeal(Q_Initial, HL_Lfom, H) := Q_Initial*H/HL_Lfom
Q_Lfom(Q_Initial, HL_Lfom, D_Drill, PS, H) :=
    D_LfomOrifices ← fD_LfomOrifices(Q_Initial, HL_Lfom, D_Drill)
    H_Submerged ← H - ramp(D_LfomOrifices/2, fB_LfomRows(Q_Initial, HL_Lfom), HL_Lfom)
    N_LfomOrifices ← fN_LfomOrifices(Q_Initial, HL_Lfom, D_Drill, SDR_41)
    D_LfomOrifices ← fD_LfomOrifices(Q_Initial, HL_Lfom, D_Drill)
    for i ∈ 0 .. last(H_Submerged)
        Q ← Q + Q_orificeV(D_LfomOrifices, H_Submerged[i], Pi_VCOrifice)*N_LfomOrifices[i]
    return Q
N_LfomOrifices := fN_LfomOrifices(Q_Initial, HL_Lfom, D_Drill, SDR_41)
H_LfomOrifices := fH_LfomOrifices(Q_Initial, HL_Lfom, D_Drill)
B_LfomRows := fB_LfomRows(Q_Initial, HL_Lfom)  # Center-to-center spacing between LFOM rows
ND_RMPipe :=
    2 in if Q_Plant == 1.6*L/s
    fND_LfomPipe(Q_Plant, HL_Lfom, Π_LfomSafety, SDR_26) otherwise
PS_RMPipe := PS_Decision(ND_RMPipe)
PS_RMPipeStr := PSToString(PS_RMPipe)
D_LfomOrifices := fD_LfomOrifices(Q_Initial, HL_Lfom, D_Drill)
N_LfomRows := length(N_LfomOrifices)
Q_LfomErrorMaxSplit := max(sqrt(Q_LfomError(Q_Train, HL_LfomSplit, D_Drill, SDR_41)^2))
H_GraphSplit := 0 cm, 0.5 cm .. HL_LfomSplit
N_LfomOrificesSplit := fN_LfomOrifices(Q_Train, HL_LfomSplit, D_Drill, SDR_41)
H_LfomOrificesSplit := fH_LfomOrifices(Q_Train, HL_LfomSplit, D_Drill)
B_LfomRowsSplit := fB_LfomRows(Q_Train, HL_LfomSplit)
ND_RMPipeSplit :=
    2 in if Q_Train == 1.6*L/s
    fND_LfomPipe(Q_Train, HL_LfomSplit, Π_LfomSafetySplit, SDR_26) otherwise
PS_RMPipeSplit := PS_Decision(ND_RMPipeSplit)
PS_RMPipeStrSplit := PSToString(PS_RMPipeSplit)
D_LfomOrificesSplit := fD_LfomOrifices(Q_Train, HL_LfomSplit, D_Drill)
N_LfomRowsSplit := length(N_LfomOrificesSplit)
