# In this section, sedimentation tank parameters are re-calculated for expansion ready design. All parameters highlighted in green use initial flow in their calculations, or depend on other calculations that also use initial flow. All parameters not highlighted are calculated based on expanded flow.
# Inlet Manifold Diffuser Design for Energy Dissipation Rate
W_Sed := W_SedPlate
W_SedDiffuserInnerMin := ((Pi_JetPlane*W_Sed*V_SedUpBod)^3/ED_SedInletMax)^(1/4)
W_SedDiffuserInner := max(Ceil(W_SedDiffuserInnerMin, 1/16*in), 1/16*in)
ED_SedInlet := (Pi_JetPlane*V_SedUpBod*W_Sed)^3/W_SedDiffuserInner^4
PS_SedDiffuser := SDR_26
PS_SedDiffuserStr := PSToString(PS_SedDiffuser)
T_SedDiffuserPvc := (OD(ND_SedDiffuser) - ID(ND_SedDiffuser, PS_SedDiffuser))/(2*Pi_PvcStretch)
Circ_SedDiffuserInner := Pi_PvcStretch*π*ID(ND_SedDiffuser, PS_SedDiffuser)
L_SedDiffuserInner := (Circ_SedDiffuserInner - 2*W_SedDiffuserInner)/2
L_SedDiffuserOuter := L_SedDiffuserInner + 2*T_SedDiffuserPvc
B_SedDiffuser := Ceil(L_SedDiffuserOuter, 1 cm)
V_SedDiffuser := V_SedUpBod*W_Sed*B_SedDiffuser/(W_SedDiffuserInner*(B_SedDiffuser - 2*T_SedDiffuserPvc))
HL_SedDiffuser := V_SedDiffuser^2/(2*g)
# Number of Sed Tanks
# Max manifold flow rate
PS_SedMan := SDR_41
PS_SedManStr := PSToString(PS_SedMan)
Q_SedManifoldMaxED := Q_PipeED(ED_SedInletMax, ID(ND_SedManifoldMax, PS_SedMan), Pi_VCOrifice, Pi_JetRound)
V_SedManifoldMaxFlowDist := sqrt(((1 - Pi_QSedInlet^2)/(Pi_QSedInlet^2 + 1))*4*g*HL_SedDiffuser)
Q_SedManifoldMaxFlowDist := π*IR(ND_SedManifoldMax, PS_SedMan)^2*V_SedManifoldMaxFlowDist
Q_SedManifoldMax := min(Q_SedManifoldMaxED, Q_SedManifoldMaxFlowDist)
# Max flow rate for convenient pipe lengths
Q_SedMaxUpflowLength := V_SedUpBod*W_Sed*L_SedUpflowMax
# Max sed tank flow rate
Q_SedMax := Floor(min(Q_SedMaxUpflowLength, Q_SedManifoldMax), 1*L/s)
N_SedTanksMinFit :=
    3 if Q_Initial > Q_PlantMaxLF
    1 otherwise  # The number of sed tanks should be calculated based on the initial, non-expanded flow.
N_SedTanksMinQ := ceil(Q_Initial/Q_SedMax - 0.00001)
N_SedTanks := max(N_SedTanksMinFit, N_SedTanksMinQ)
Q_Sed := Q_Initial/N_SedTanks
L_SedActiveEst :=
    Q_Sed/(W_Sed*V_SedUpBod) - L_SedPlateEst*cos(AN_SedPlate) if Q_Initial > Q_PlantMaxLF
    Q_Sed/(W_Sed*V_SedUpBod) otherwise
# Inlet Manifold and Launder Diameters
ND_SedManifold := ND_Min((4/π*Q_Sed/V_SedManifoldMaxFlowDist)^(1/2), PS_SedMan)
ND_SedLaunder := ND_Manifold(Q_Sed, HL_SedLaunderBod, L_SedActiveEst, Pi_QLaunderOrifices, SDR_26, Nu_Water, E_Pvc, K_PipeExit, floor(L_SedActiveEst/B_SedLaunderOrificesEst))
PS_SedLaunder := PS_Decision(ND_SedLaunder)
PS_SedLaunderStr := PSToString(PS_SedLaunder)
# All parameters highlighted in green use initial flow in their calculations, or depend on other calculations that also use initial flow. All parameters not highlighted are calculated based on expanded flow.
# Inlet Channel Things
L_SedChannel := N_SedTanks*W_Sed + T_SedWall + (N_SedTanks - 1)*T_SedDividingWall
HL_SedWeirExit := Headloss_weir(Q_Initial, L_SedChannel)
HL_SedWeirExitConstruct := Headloss_weir(Q_Plant, L_SedChannel)
# This is used to calculate the depth of the channel needed for 60 L/s (that is, the depth that will be initially constructed and then filled in to accommodate the smaller inital flows.
HL_SedInletChannelMax := (HL_SedLaunderBod + HL_SedDiffuser)*(1 - Pi_QSedTanks^2)
HW_SedInletChannelMax := 50 cm  # relaxed from 35 cm to 50 cm on 8/10/16 by jsc377
W_SedInletChannelPreWeirMinPlumbing := OD_Fitting(ND_SedManifold) + 2*S_Fitting
W_SedInletChannelPreWeirMinHL := W_HorizChannel(Q_Train, HW_SedInletChannelMax, HL_SedInletChannelMax, L_SedChannel, Nu_Water, E_Concrete, 0)
W_SedInletChannelPreWeir := max(W_SedInletChannelPreWeirMinPlumbing, W_SedInletChannelPreWeirMinHL)
W_HorizChannel =  # error: This variable is undefined.
HW_SedInletChannelMinPlumbing := HL_SedLaunderBod + HL_SedDiffuser + OD_Fitting(ND_SedLaunder) + S_Fitting + HL_SedWeirExit
HW_SedInletChannelHL := H_HorizChannel(Q_Initial, W_SedInletChannelPreWeir, HL_SedInletChannelMax, L_SedChannel, Nu_Water, E_Concrete, 0)
HW_SedInletChannel := max(HW_SedInletChannelMinPlumbing, HW_SedInletChannelHL)
H_SedInletChannel := HW_SedInletChannel + H_PlantFreeboard
# These three parameters are used to calculate the depth of the channel needed for 60 L/s (that is, the depth that will be initially constructed and then filled in to accommodate the smaller inital flows).
HW_SedInletChannelMinPlumbingConstruct := HL_SedLaunderBod + HL_SedDiffuser + OD_Fitting(ND_SedLaunder) + S_Fitting + HL_SedWeirExitConstruct
HW_SedInletChannelHLConstruct := H_HorizChannel(Q_Initial, W_SedInletChannelPreWeir, HL_SedInletChannelMax, L_SedChannel, Nu_Water, E_Concrete, 0)
HW_SedInletChannelConstruct := max(HW_SedInletChannelMinPlumbingConstruct, HW_SedInletChannelHLConstruct)
H_SedInletChannelConstruct := HW_SedInletChannelConstruct + H_PlantFreeboard
W_SedWeirInlet := L_SedChannel
HL_SedWeirInlet := Headloss_weir(Q_Initial, W_SedWeirInlet)
H_SedWeirInlet := HW_SedInletChannel + H_SedInletWeirFreeboard  # The weir height should be set to not overflow during normal operation.
# Height of the water, as calculated for small flow, plus HSedInletWeirFreeboard, which is the same regardess of flow
W_SedInletChannelPostWeir := max(W_ChannelMin, W_HorizChannel(Q_Train, H_SedWeirInlet, H_SedWeirInlet, L_SedChannel, Nu_Water, E_Concrete, 1))
W_SedInletChannel := W_SedInletChannelPreWeir + T_SedWeir + W_SedInletChannelPostWeir
V_SedInletChannel := Q_Initial/(W_SedInletChannelPreWeir*HW_SedInletChannel)
# Drain should be sized for 60 L/s
ND_SedChannelDrain := ND_PipeFlow(Q_Train, SDR_26, HW_SedEst, HW_SedEst + W_SedInletChannel, Nu_Water, E_Pvc, K_PipeEnt + K_PipeExit + K_El90)
PS_SedChannelDrain := PS_Decision(ND_SedChannelDrain)
PS_SedChannelDrainStr := PSToString(PS_SedChannelDrain)
# Outlet Pipe to Filter
L_SedToFiPipeEst := W_DCWalkway + W_SedInletChannel + 1 m
ND_SedToFiPipeMax := 8 in
PS_SedToFiPipe := SDR_41
PS_SedToFiPipeStr := PSToString(PS_SedToFiPipe)
Q_SedToFiPipeMax := Q_pipetotal(ID(ND_SedToFiPipeMax, PS_SedToFiPipe), HL_SedToFiPipeMax, L_SedToFiPipeEst, Nu_Water, E_Pvc, K_El90 + K_PipeEnt + K_PipeExit)
N_SedToFiPipes := ceil(Q_Train/Q_SedToFiPipeMax)
Q_SedToFiPipe := Q_Train/N_SedToFiPipes
ND_SedToFiPipe := ND_PipeFlow(Q_SedToFiPipe, PS_SedToFiPipe, HL_SedToFiPipeMax, L_SedToFiPipeEst, Nu_Water, E_Pvc, K_El90 + K_PipeEnt + K_PipeExit)
HL_FiEntrancePipe := h_l(Q_SedToFiPipe, ID(ND_SedToFiPipe, PS_SedToFiPipe), L_SedToFiPipeEst, K_El90 + K_PipeEnt + K_PipeExit, Nu_Water, E_Pvc)
# Exit Channel
# Sized for small flow
H_construct := H_SedInletChannelConstruct
H_SedExitChannel := H_SedInletChannel
# This is the height of the channel required for a 60 L/s flow, as it should be constructed initially before being filled in to accommodate smaller initial flow.
HW_SedExitChannel := HW_SedInletChannel - HL_SedLaunderBod - HL_SedDiffuser
W_SedExitChannelPreWeir := W_ChannelMin  # Same for all flows (design constraint)
H_SedWeirExit := HW_SedExitChannel - HL_SedWeirExit
W_SedExitChannelPostWeir := max(S_Fitting + OD_Fitting(ND_SedToFiPipe), S_Fitting + OD_Fitting(ND_SedChannelDrain), W_ChannelMin, W_HorizChannel(Q_Train, H_SedWeirExit, H_SedWeirExit, L_SedChannel, Nu_Water, E_Concrete, 1))
W_SedExitChannel := W_SedExitChannelPreWeir + T_SedWeir + W_SedExitChannelPostWeir
W_SedExitChannelDrainBox := max(S_Fitting + OD_Fitting(ND_SedChannelDrain), W_SedExitChannelPostWeir)
# Sed Hopper Length
W_SedInletChannelDrainBox := max(2*S_Fitting + OD_Fitting(ND_SedChannelDrain), W_SedInletChannelPostWeir)
L_SedHopper :=
    W_SedExitChannel + T_SedWeir + W_SedInletChannel + T_SedChannelWall - T_SedWeir if Q_Train > Q_PlantMaxLF
    max(L_SedHopperMin, L_SedPlateEst*cos(AN_SedPlate) - T_SedWeir) otherwise
# Plate Settler and Total Tank Length
L_SedPlate := Ceil((S_SedPlate*(V_SedUpBod/V_SedCBod - 1) + T_SedPlate*V_SedUpBod/V_SedCBod)/(sin(AN_SedPlate)*cos(AN_SedPlate)), 10 cm)
N_SedPlates :=
    CeilNearest((L_SedActiveEst*sin(AN_SedPlate) - T_SedPlate)/(S_SedPlate + T_SedPlate), PlateIndex) if Q_Train > Q_PlantMaxLF
    CeilNearest(((L_SedActiveEst + T_SedWeir + L_SedHopper - L_SedPlate*cos(AN_SedPlate))*sin(AN_SedPlate) - T_SedPlate)/(S_SedPlate + T_SedPlate), PlateIndex) otherwise
N_SedModPlates :=
    N ← 8
    while mod(N_SedPlates, N) ≠ 0
        N ← N + 1
    return N
N_SedModules := N_SedPlates/N_SedModPlates
N_SedPlatesTotal := N_SedTanks*N_SedPlates
L_SedLF := L_SedPlate*cos(AN_SedPlate) + (N_SedPlates - 1)*B_SedPlate/sin(AN_SedPlate) + T_SedPlate/sin(AN_SedPlate)
L_SedUpflow :=
    L_SedPlate*cos(AN_SedPlate) + (N_SedPlates - 1)*B_SedPlate/sin(AN_SedPlate) + T_SedPlate/sin(AN_SedPlate) if Q_Train > Q_PlantMaxLF
    L_SedLF - T_SedWeir - L_SedHopper otherwise
L_Sed := L_SedHopper + T_SedWeir + L_SedUpflow
V_SedUp := Q_Sed/(L_SedUpflow*W_Sed)
V_SedC := (Q_Sed/((L_SedUpflow - L_SedPlate*cos(AN_SedPlate))*W_Sed))*S_SedPlate/(L_SedPlate*sin(AN_SedPlate)*cos(AN_SedPlate) + S_SedPlate)
# Inlet Manifold
PS_SedJetReverser := SDR_26
PS_SedJetReverserStr := PSToString(PS_SedJetReverser)
L_SedManifoldOffset := IR(ND_SedJetReverser, PS_SedJetReverser) - W_SedDiffuserInner/2
L_FlocWeirToDiffuserGap := L_SedManConnectionStub + L_SedManFirstDiffuserGap - (L_SedDiffuserOuter/2 - OR(ND_SedDiffuser))
N_SedManifoldPorts := floor((L_SedUpflow - L_FlocWeirToDiffuserGap - L_SedWallToDiffuserGapMin - L_SedDiffuserOuter)/B_SedDiffuser) + 1
Q_SedManifoldPort := Q_Sed/N_SedManifoldPorts
# Exit Launder
L_SedLaunder :=
    L_SedUpflow - CapThickness(ND_SedLaunder) - max(0 m, 2*CouplingLength(ND_SedLaunder) - T_SedChannelWall) if T_SedChannelWall > CouplingLength(ND_SedLaunder) and Q_Train > Q_PlantMaxLF
    L_Sed - CapThickness(ND_SedLaunder) - S_Fitting - ElbowRadius(ND_SedLaunder) - OR_Fitting(ND_SedLaunder) - SocketDepth(ND_SedLaunder) if Q_Train ≤ Q_PlantMaxLF
    L_SedUpflow + T_SedChannelWall - CouplingLength(ND_SedLaunder) - CapThickness(ND_SedLaunder) otherwise
N_SedLaunderOrificesEst := floor((L_SedUpflow - SocketDepth(ND_SedLaunder) - CapThickness(ND_SedLaunder))/B_SedLaunderOrificesEst)
Q_SedLaunderOrificeEst := Q_Sed/N_SedLaunderOrificesEst
# This the HL due to major & minor losses loses through the manifold.
D_SedLaunderOrifice := RoundNearest(D_circle(A_orifice(HL_SedLaunderBod, Pi_VCOrifice, Q_SedLaunderOrificeEst)), D_Drill)
Q_SedLaunderOrificeTarget := Q_orifice(D_SedLaunderOrifice, HL_SedLaunderBod, Pi_VCOrifice)
B_SedLaunderOrifice := (L_SedUpflow - SocketDepth(ND_SedLaunder) - CapThickness(ND_SedLaunder) - D_SedLaunderOrifice)/(Q_Sed/Q_SedLaunderOrificeTarget - 1)
N_SedLaunderOrifices := floor((L_SedUpflow - SocketDepth(ND_SedLaunder) - CapThickness(ND_SedLaunder) - D_SedLaunderOrifice)/B_SedLaunderOrifice) + 1
L_SedLaunderEndToOrifice := (L_SedUpflow - SocketDepth(ND_SedLaunder) - CapThickness(ND_SedLaunder) - B_SedLaunderOrifice*(N_SedLaunderOrifices - 1))/2
HL_SedLaunderMajor := HL_Manifold(Q_Sed, ID(ND_SedLaunder, PS_SedLaunder), L_SedLaunder, 0, Nu_Water, E_Pvc, N_SedLaunderOrifices)
HL_SedLaunderOrifice := h_orifice(D_SedLaunderOrifice, Pi_VCOrifice, Q_Sed/N_SedLaunderOrifices)
HL_SedLaunder := HL_SedLaunderOrifice + HL_SedLaunderMajor
# Side Slopes
W_SedSideSlopes := (W_Sed - ID(ND_SedJetReverser, PS_SedJetReverser))/2
H_SedSideSlopes := tan(AN_SedSlope)*W_SedSideSlopes
# Inlet Channel Slopes
H_SedIChanLastCoupling := H_SedWeirExit - 2 cm
H_SedIChanStep := H_SedIChanLastCoupling/max(1, N_SedTanks - 1)
L_SedIChanSlopes := W_Sed + T_SedDividingWall - OD_Fitting(ND_SedManifold) - S_Fitting
# Elevation
Z_SedSludgeDrain := Plant_Origin[2] - OR(ND_SedJetReverser)
Z_SedManifoldPipe := Z_SedSludgeDrain + H_JetReverserToDiffusers + L_SedManifoldDiffuser + IR(ND_SedManifold, PS_SedMan)
Z_SedSideSlopes := Z_SedSludgeDrain + H_SedSideSlopes
Z_SedFlocWeir := max(Z_SedManifoldPipe + OR(ND_SedManifold) + T_ConcreteMin, Z_SedSideSlopes + H_SedSlopesToFlocWeirMin)
H_SedFlocWeir := Z_SedFlocWeir - Z_SedSludgeDrain
Z_SedLamellaBottom := Z_SedFlocWeir + H_FlocWeirToPlateFrame + OD(ND_SedPlateFrame)
H_SedLamellaBottom := Z_SedLamellaBottom - Z_SedSludgeDrain
Z_SedLamellaSupportLedge := Z_SedLamellaBottom - OR(ND_SedPlateFrame) - OR_Fitting(ND_SedPlateFrame)
Z_SedLaunder := Z_SedLamellaBottom + L_SedPlate*sin(AN_SedPlate) + T_SedPlate*cos(AN_SedPlate) + H_LamellaToLaunder + OR(ND_SedLaunder)
Z_SedChannelBottom := Z_SedLaunder + OR(ND_SedLaunder) - HW_SedWeirExit
Z_SedWeirExit := Z_SedChannelBottom + HW_SedWeirExit
Z_SedHopperSideSlope := Z_SedFlocWeir
AN_SedHopperNorthSlope := 90 deg - (asin((OR_Fitting(ND_SedManifold) + 1 cm)/sqrt((W_Sed/2 - L_SedManifoldOffset)^2 + (Z_SedFlocWeir - Z_SedManifoldPipe)^2)) + atan((W_Sed/2 - L_SedManifoldOffset)/(Z_SedFlocWeir - Z_SedManifoldPipe)))
Z_SedHopperBottom :=
    Z_SedFlocWeir - (W_Sed - (3*S_Fitting + OD_Fitting(ND_SedChannelDrain) + OD(ND_SedHopperDrain)))*tan(AN_SedHopperNorthSlope) if Q_Train > Q_PlantMaxLF
    Z_SedManifoldPipe + OR_Fitting(ND_SedManifold) + S_Fitting/2 otherwise
AN_SedFlocHopperSouthSlope := atan((Z_SedFlocWeir - Z_SedHopperBottom)/(3*S_Fitting + OD_Fitting(ND_SedChannelDrain)))
H_SedHopperFrontSlope := Z_SedFlocWeir - Z_SedHopperBottom
H_SedHopperBackSlope := H_SedHopperFrontSlope
Z_SedHopperBackSlope := Z_SedHopperBottom + H_SedHopperBackSlope
AN_SedHopperFrontBackSlope := atan(H_SedHopperBackSlope/(L_SedHopper/2))
AN_SedHopperSlopeMin := min(AN_SedHopperNorthSlope, AN_SedFlocHopperSouthSlope, AN_SedHopperFrontBackSlope)
X_SedHopperBottom := -L_Sed + L_SedHopper/2
Z_SedTop :=
    Z_SedChannelBottom + H_SedInletChannel if Q_Train > Q_PlantMaxLF
    Z_SedLaunder + OR(ND_SedLaunder) + HL_SedLaunderBod + H_PlantFreeboard otherwise
H_Sed := Z_SedTop - Z_SedSludgeDrain  # Height of sed tank from the lip of the jet reverser
ZW_SedInletChannel := Z_SedChannelBottom + HW_SedInletChannel
ZW_Sed :=
    ZW_SedInletChannel - HL_SedDiffuser if Q_Train > Q_PlantMaxLF
    Z_SedLaunder + OR(ND_SedLaunder) + HL_SedLaunderBod otherwise
HW_Sed := ZW_Sed - Z_SedSludgeDrain
Z_Walkway :=
    Z_SedChannelBottom if Q_Train > Q_PlantMaxLF
    Z_SedTop - 50 cm otherwise
# Hopper Drain
L_SedHopperDrainPipe := H_SedHopperBackSlope/tan(AN_SedHopperFrontBackSlope) + T_SedWall + SocketDepth(ND_SedHopperDrain)
# Plate Settler Support Frame
N_SedFrameCrossPipe := max(round((L_SedUpflow - L_SedPlate*cos(AN_SedPlate) + OR(ND_SedPlateFrame) - OR_Fitting(ND_SedPlateFrame))/B_SedPlateFrameCrossEst), 3)
B_SedPlateFrameCross := (L_SedUpflow - L_SedPlate*cos(AN_SedPlate) + OR(ND_SedPlateFrame) - OR_Fitting(ND_SedPlateFrame))/(N_SedFrameCrossPipe - 1)
# Residence Time Estimate
Vol_SedActiveEst := W_Sed*L_SedUpflow*HW_Sed - W_SedSideSlopes*H_SedSideSlopes*L_SedUpflow
Ti_Sed := Vol_SedActiveEst/Q_Sed
# Inlet Manifold Air Vent
# Addition of the small holes on the top of the inlet manifold to allow air escape. Calcs by dfg42 3/18/15
# What is this variable?
Q_SedBay := Q_Sed
L_SedManifoldPipeActive := 3 m
D_SedAirVentMax := .5 in
A_SedAroundPipe := L_SedManifoldPipeActive*20*cm
V_SedUpPipeMid := Q_SedBay/A_SedAroundPipe
Q_SedAirMin := V_SedUpPipeMid*L_SedManifoldPipeActive*ID(ND_SedManifold, PS_SedMan)
Δh_SedManifold := Z_SedLaunder - Z_SedManifoldPipe
D_SedAirVentEst := sqrt(4*Q_SedAirMin/(π*Pi_VCOrifice*sqrt(2*g*Δh_SedManifold)))
N_SedAirVents :=
    N ← 1
    while D_SedAirVentEst^2/N > D_SedAirVentMax^2
        N ← N + 1
    return N
D_AirVentHoles := CeilNearest(D_SedAirVentEst/N_SedAirVents, D_Drill)
Q_AirVent := Pi_VCOrifice*π*D_AirVentHoles^2/4*sqrt(2*g*Δh_SedManifold)
V_AirVent := Q_AirVent/(π*D_AirVentHoles^2/4)
