# Expert Inputs
Country := 0
Language := 0
# Tabulated Constants
Rho_H2O := 1000*kg/m^3  # Density of water
Nu_Water := 1*10^-6*m^2/s  # The kinematic viscosity of water.
Rho_FB := 1001*kg/m^3  # Density of Flocs  # Check for where this is used. Using a single density to represent flocs isn't a great approach.
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# Chemical Engineering Science, Vol. 50, No. 12, pp. 1877-1880, 1995
# THE INFLUENCE OF VISCOSITY ON MIXING IN JET REACTORS
# Jo BALDYGA, J. R. BOURNE* and R. V. GHOLAP
Pi_JetRound := 0.4
Pi_JetPlane := 0.225  # This is an estimate for plane jets as created in the flocculator and in the sed tank jet reverser.
Pi_VenaContractaOrifice := 0.63
# General Assumptions and Constants
Plant_Origin := [0; 0; 0]*m
W_HumanMin := 0.5 m  # increased from 45 cm mrf222
H_HumanAccess := 1.5 m  # The height of the walkway above the drain channel bottom so that someone can walk through the drain channel.
acad_version := 2008  # This probably isn't needed anymore
H_Freefall := 0.1 m
H_PlantFreeboard := 0.1*m  # Used to set the minimum height of entrance, floc, and sed walls
ND_SpacerPipe := 3/4*in  # Spacer used to fabricate plate settler modules and baffle modules
S_Fitting := 5 cm  # minimum space between fittings in a tank or fittings and the wall of the tank.
W_ChannelMin := 15 cm  # Minimum channel width for constructability
# This should be changed to be a function of channel depth. In the form shown below. We need to get construction review of these break points.
W_ChannelMinProposed(H) :=
    W_ChannelMin ← 15 cm if H ≤ 50 cm
    W_ChannelMin ← 50 cm if H > 50 cm
Π_Rectangular := 1/2  # Π.Rectangular is defined as the optimum "height over width ratio" (1/2) for a rectangular open channel
# This needs to be defined for a particular channel. We have many channels where head loss is constrained to be order mm. Where is this parameter used?
# The solution should be to design so that there is not a deep, wide channel for a simple purpose. This function is only useful when the depth is already constrained. from Drew 6/30/2014 (changed by mrf222)
HL_ChannelMax := 5 cm
EN_Water := 0  # Equals 1 to draw boxes showing max water levels, 0 normally
# If EN_Water is set to 1, this controls the filter operation mode for which water/sand elevations are drawn. 0 for terminal, 1 for clean bed, and 2 for backwash.
EN_FilterWater := 2
EN_DoubleTrain :=
    1 if Q_Plant ≥ 100*L/s
    0 otherwise
# Double Train is not a good name for this variable, because we may have four train plants as we continue to reach higher flow rates. However, the cut off points for multiple train plants are not yet set.
N_Train :=
    1 if Q_Plant < 100*L/s
    2 if Q_Plant ≥ 100*L/s and Q_Plant < 200*L/s
    4 otherwise
# changed by mrf222 8/8/2014
Q_Train := Q_Plant/N_Train
# Flow Orifice Meter
Π_Lfomorifice := 10  # Maximum number of rows or orifices in lfom.
Π_LfomSafety := 1.5  # safety coefficient that ensures free fall at the bottom of the lfom pipe
Π_LfomSafetyMin := 1.15
# minimum safety coefficient for lfom pipe diameter; only reduced between 55 L/s and 70 L/s - the intermediate zone between the using an LFOM pipe and an LFOM channel
# It may be possible to eliminate this if we switch to plate LFOM at 50 Lps
HL_Nlfom := 40 cm  # head loss through nonlinear orifice meter (simple orifice)
# When is this used?
HL_LfomMin := 20 cm  # Minimum head loss through linear orifice meter
HL_LfomMax := 40 cm  # Maximum head loss through linear orifice meter to be used as needed for high flow plants.
ND_LfomPipeMax := 12 in
S_LfomOrificesMin := 5 mm  # Difference between the height of the water in floc tank and the bottom set of holes on the linear flow orifice meter
# Both of these assumptions were tested over a range of flow rates and found to give reasonable Lfom configurations.
EN_LfomPipe :=
    0 if Q_Plant ≥ 80*L/s
    1 otherwise  # Enumerated type that selects between pipe (1) and plate (0) for the LFOM
# The cut off for the LFOM pipe has been bumped up to 80 Lps because the LFOM design is not yet feasable. mrf222
# Entrance Tank
EN_EtGrit := 0  # 0 if we want hoppers, 1 otherwise  # Used to make a smaller entrance tank if the source water doesn't contain grit.
EN_TwoInlets := 0  # 0 if there is only one inlet, 1 if there is two inlets
AN_EtSlopeMax := 45 deg  # Angle of the sloped walls of the entrance tank hoppers
V_EtUpMin := 8*mm/s  # Capture velocity for the entrance tank.
HW_EtMax := 1.5 m  # Maximum total water depth of the entrance tank to ensure easy access to drain plugs
S_EtFloat := 10 cm  # Extra space around the float (increase in effective diameter) to ensure that float has free travel
Ti_EtDrain := 1 min
# Time required to have contents of one hopper drain. Note that during this time it is assumed that the water level in the entrance tank remains constant.
EN_LinearFlow := 1  # 1 if using Lfom, zero if using nonlinear system
# Should the nonlinear system be eliminated given that we aren't using it?
E_MaxRM := 1*W/kg  # This should be ED.RM. I don't understand why it is a maximum value.
L_EtSupport := 40 cm  # Needs a definition
L_FlocCouplingExt := 5 cm  # Needs a definition
ε_RMGate := 0.5  # Needs a definition
H_Freefall20 := 20 cm  # This needs a better name. Hopefully this isn't actually used anywhere and can be deleted.
# Chemical Storage Tanks
EN_Coag := 1  # 0 is alum, 1 is PACl
C_CoagDoseMax := 80*mg/L
C_ChlorineDoseMax := 2*mg/L
C_FilterCoagDoseMax := 0.60*mg/L
C_CoagStockMax := 200*gm/L
Ti_CoagStock := 30 hr
Ti_ChlorineStock := 30 hr
Ti_FilterCoagStock := 30 hr
C_ChlorineStockMax := 15*gm/L
# This is the elevation difference between the outlet of the coagulant stock tanks and the water level in the constant head tank, which is set by the hydraulic head required to provide the desired max chemical flow rate through the float valve orifice in the CHT. It is treated as constant here to ensure a practical elevation difference is left between the stock tanks and the CHT even when a float valve is selected which requires very little hydraulic head to deliver the required maximum chemical flow rate.
H_CoagTankAboveHeadTank := 30 cm
B_StockOutlet := 10 cm  # This is the distance from the bottom of the stock tanks to the outlets to allow space for solids to settle.
S_ChemTankBorder := 15 cm  # Distance between a tank and the border of the platform
FilterCoag := 0  # this variable is set to zero if filter coagulant is not being used
# Chemical Dose Controller
# This is the estimated elevation difference between the water level in the constant head tank and the top of the entrance tank wall. The constant head tank water level is the same as the elevation of the outlet of the dosing tube when the lever arm is horizontal (zero flow). Therefore this height depends only on the hardware used to make the slider/drop tube assembly and to mount the lever arm to the entrance tank wall. Note that this will vary depending on hardware used, and is only defined here to calculate the elevation of the stock tanks, which can be approximate.
H_DoserAssembly := 6.77 cm
Π_LinearCdcError := 10 %
# Maximum error allowed between a linear flow vs tube head loss relationship and the actual performance (which is affected by non-linear minor losses), assuming calibration at the maximum flow rate
K_CdcTube := 2  # Estimated minor loss coefficient for the small-diameter flexible tubing using fittings that have larger ID than the tubing
# Head loss through the doser at maximum flow rate. This equality basically means the lever is the same length on both sides.
HL_CdcCoag := HL_LfomMin
# Maximum head loss through the small-diameter dosing tubing, which corresponds to the variation in water levels in the entrance tank and the difference between the maximum and minimum elevation of the dosing tube outlet attached to the lever arm.
HL_CdcChlorine := 10 cm
# The maximum chlorine head loss is set to 10cm to keep the length of tubing low. This means that the chlorine doser will be calibrated with the 2 mg/L dose at the middle of the lever arm.
H_CdcFloatvalve := 5 cm  # Estimated distance between fluid level in constant head tank and float valve orifice
# Chemical Dose Controller Dimensions (based on inserted drawings)
L_CdcLever := 0.45 m  # assumed from Drew's drawing for now
W_LeverArm := 0.0032 m
H_LeverArm := 0.0254 m  # height of the lever arm
D_CdcCht := 6 in
H_LeverHole := 0.0312 m - 0.0095/2*m
# Distance from the top of the entrance tank to the to the middle of the lever arm hole for the cable - (minus the) radius of the hole
D_Cable := 0.1 in
D_LABOrigintoLAOriginZ := 0.0254 m  # Edited DLABOrigintoLAOriginZ to accommodate dimensions from McMaster vs Inserted Drawing
L_LAOriginToDtY := 0.7812 m  # Distance from the lever arm origin to the outside center of the top part of the drop tube in the y direction
L_LAOriginToDtZ := 0.0429 m  # Distance from the lever arm origin to the drop tube in the z direction
L_LAOriginToDtCenterX := 0.0290 m  # Distance from the lever arm origin to the center of the drop tube in the x direction
T_CdcReducer := 9.5 mm  # Measured from CDC research team's apparatus
L_LAOriginToReducerX := 0.0290 m  # Distance from the lever arm origin to the center of the reducer in the x direction
L_LAOriginToReducerY := 0.7315 m  # Distance from the lever arm origin to the outside center of the top part of the reducer in the y direction
L_LAOriginToReducerCenterX := 0.0290 m  # Distance from the lever arm origin to the center of the reducer in the x direction
L_LAOriginToReducerCenterY := 0.7919 m  # Distance from the lever arm origin to the center of the reducer in the y direction
L_Slider := 3 in
R_LArmBar := 3/16*in
D_LArmBar := 3/8*in
W_LBracket := 5/8*in
L_LBracket := 1.5 in
T_LBracket := .08 in
L_LArmBar := 4 in
W_Slider := 3.2*10^-3*m
ND_DropTube := 1/2*in
H_Slider := 5/8*in
L_DropTube := 0.61 m
# The length of the drop tube needs to be calculated. The drop tube must as long as the supercritical flow. Thus the drop tube must extend down to the elevation of the sed tank effluent weir. This constant should be removed!
OD_CdcFitting := 5/32*in  # Outer diameter of fitting- measured from CDC research team's fitting
ID_CdcFitting := 0.126 in  # Inner diameter of fitting- measured from CDC research team's fitting
L_CdcFitting := 0.75 in  # Length of fitting - measured from CDC research team's fitting
# Flocculator
Q_PlantMaxLF := 3*L/s  # Prompts the transition to a low flow flocculator.
H_FlocOption := 0
# The minor loss coefficient is 2. According to measurements at Agalteca and according to
# https://confluence.cornell.edu/display/AGUACLARA/PAHO+Water+Treatment+Publications (page 100 in chapter on flocculation)
K_FlocBaffle := 2.5
# Increased both to provide a safety margin on flocculator head loss and to simultaneously scale back on the actual collision potential we are trying to achieve.
W_FlocChannel := 53 cm  # This is one half of a baffle, which would make construction easier. mrf222 12/10/2014
S_FlocBaffleSetBackPlastic := 2 cm
CP_Floc := 75 m^(2/3)  # Collision potential
Pi_JSOptimal := 3
Pi_FlocBaffleMin := 1
Pi_FlocBaffleMax := 1.5
# Increased from 10 to 10.5 on 5/4/2011 for La Libertad
# Reset to 10 on 4/21/14 by mw24 until we assess if higher values would be an improvement.
ED_Floc := 10*mW/kg
Ti_FlocDrain := 30 min  # It might be good to decrease this to 15 minutes
# Sedimentation Tank
ND_SedManifoldMin := 6 in  # Smallest size of manifold we will use because smaller manifolds create sed tanks that are too short?
ND_SedManifoldMax := 8 in  # This might be reduced to a smaller pipe size to make the manifolds easier to manage.
N_SedTanksMin := 3
V_SedUpBod := 1*mm/s  # changed from 0.8 mm/s to 1 mm/s  on 8/13/2011 to obtain a better upflow velocity in the bottom of sed tanks for floc blankets.
V_SedCBod := 0.12*mm/s  # Plate settler capture velocity.
AN_SedSlope := 50 deg  # Angle of the sloped bottom of the sed tank. Changed from 60 to 50 on 8/13/2011 to reduce construction costs.
AN_SedHopperSlope := 45 deg  # This slope needs to be verified for functionality in the field. A steeper slope may be required in the floc hopper.
HW_SedEst := 2 m
N_SedBaysPerTank := 1  # Number of sed bays per tank, changed to 1 as per request of engineers in Honduras as of 4/22/2014
T_SedTankBottomSlab := 0 cm  # This variable was added 6/05/14 to allow the bottom slab to be adjusted.
# Inlet Channel
Perpendicular_Weir := 0
Parallel_Weir := 1
Inlet_FullDepth := 2
# Increased by Monroe on 4/23/2014 because this allows us to build longer sedimentation tanks without increasing the manifold diameter and there is no evidence of a  performance hit from a higher energy dissipation rate going into the sed tank
ED_SedInlet := 30*mW/kg
HL_SedWeirMax := 5 cm
H_SedInletWeirFreeboard := 2 cm
# This is the height of the inlet weir above the normal water surface. This keeps the waste channel empty and hence prevents accumulation of sludge in the waste channel.
# Exit Launder
HL_SedLaunderBod := 4 cm  # target headloss in sed launders
Pi_QLaunderOrifices := 0.80  # Ratio of min to max flow through the launder orifices
B_SedLaunderOrificesEst := 10 cm  # Center to center spacing of orifices in the launder
L_SedLaunderCapExcess := 3 cm  # The additional length needed in the launder cap pipe that is to be inserted into the launder coupling
# Sludge Drain
Pi_QSludgeOrifices := 0.85
B_SedSludgeOrificesEst := 10 cm  # Center to center spacing of orifices in the sludge drain
Ti_SludgeDrain := 30 min
S_SedDrainCoverSegment := 2 mm  # Should be eliminated because the drain cover is now poured in place.
ND_MaxSedSludgeDrain := 4 in  # added 10/17/14 by mrf222
# Plate Settler Modules
ND_SedModulePipe := 0.5 in  # Diameter of the pipe used to hold the plate settlers together
ND_SedModulePipeSpacer := 3/4*in  # Diameter of the pipe used to create spacers. The spacers slide over the 1/2" pipe and are between the plates
S_SedPlateModuleMin := 2 cm
T_SedLamellaLedge := 8 cm  # This is the vertical thickness of the lip where the lamella support sits. mrf222
# Floc Weir
H_SedSlopesToFlocWeirMin := 15 cm
H_FlocWeirToLamellaMin := 10 cm  # Vertical distance from the top of the floc weir to the bottom of the plates.
H_SedSlotDepth := 2 cm
# Inlet Manifold
S_SedInletManSlope := 10 cm  # This is the minimum distance between the inlet manifold and the slope of the sed tank.
L_SedManifoldPipeFromFlocWeir := 2 cm
# Distance the stub of pipe comes out of the floc weir. The end of this stub is where the removable part of the inlet manifold is connected. dfg42 3/23/15
L_SedManifoldPipeFromTankEnd := 2 cm  # Spacing of end of inlet manifold to the tank wall. dfg42 3/23/15
L_SedDiffusersToEnd := 3 cm  # Spacing from the last diffuser to the end of the manifold cap dfg42 3/23/15
B_AirVentHoles := 8 cm  # Air Vent Hole Spacing dfg42 3/23/15
D_SedAirVentMax := .375 in  # Maximum air vent hole diameter, this is only a test value dfg42 3/23/15
# Stacked Rapid Sand Filter
# Construction and Design Inputs
P_Atm := 1 atm
Nu_Air := 12*mm^2/s  # needed for the filter siphon design
Rho_Air := 1.204*kg/m^3  # needed for the filter siphon design
# Design guidelines say 11 mm/s. The success of lab-scale backwashing at 10 mm/s suggests that this is a reasonable and conservative value
V_FiBw := 11*mm/s
N_FiLayer := 6
V_FiLayer := V_FiBw/N_FiLayer = 1.83333 mm/s
H_FiLayerMin := 20 cm  # Depth of each filter layer
B_FiManifoldBranch := 10 cm  # center to center distance for slotted pipes.
L_FiManBranchExt := 2 cm  # How far the branch extends into the trunk line
Ti_FiBwInitiationBod := 3 min  # The time to drain the filter box of the water above the fluidized bed
HL_FiBwSF := 20 cm  # This is the extra head we are going to provide to ensure that we can initiate backwash.
HL_FiSiphonMax := 20 cm  # Maximum acceptable head loss through the siphon at steady state; used to calculate a diameter
ND_FiSandOutlet := 2 in
H_FiDistBarrier := 10 cm
L_FiSiphonChannelStubMin := 20 cm
# Being able to shorten the stub from which the siphon discharges into the main plant drain channel allows for some flexibility in the hydraulic design.
HL_FiEntrancePipeMax := 10 cm
ND_FiTrunkMax := 6 in
ND_FiBackwashSiphonMax := 8 in  # Added 10/18/14 by mrf222
# Inlet Weir Control System: Added 6/17/14
Π_QFiBwMax := 1.5
# Elevation Safety Margins
H_FiBwNoSuckAir := 20 cm  # Minimum depth in the entrance box during backwash such that there is standing water over the inlet.
H_FiSiphonNoSuckAir := 10 cm  # Minimum depth over the orifices in the siphon manifold so that there is standing water and air is not entrained.
H_FiFluidizedBedToSiphon := 20 cm
H_FiForwardNoSuckAir := 10 cm
H_FiWeirFreefall := 3 cm
H_FiAirRemovalBlockSubmerged := 5 cm
H_FiBypassSafety := 10 cm
H_DrainOutletSafety := 10 cm
H_FiOverflowWeirFreefall := 10 cm
# Operator Access
W_MpWalkwayMin := 1*m  # combine walkway assumptions!
W_DCWalkway := 1 m  # Width of the walkway above the main plant drain channel.
W_EtWalkway := 1 m  # Width of the floor space between the flocculator and the rapid mix pipe floor cutout next to the entrance tank.
W_TrainWalkway := 1.5 m  # for high flow, double train situations
# Minor Loss Coefficients
# Individual K Values | Expansions | Contractions
K_El90 := 0.9  # 90 deg elbow
diamratio_exp0.75 := 0
K_El45 := 0.45
# The loss coefficient for the channel transition in a 90 degree turn
diamratio_cont0.75 := 0
K_90 := 0.4
diamratio_exp0.25 := 0
diamratio_cont0.25 := 0
K_AngleValve := 4.3
diamratio_cont0.5 := 0
diamratio_exp0.5 := 0
K_GlobeValve := 10
K_GateValve := 0.39
K_ChkValveConv := 4
K_ChkValveBall := 4.5
K_Exp := 1  # headloss coefficient of jet
K_TeeFlowRun := 0.6
K_TeeFlowBr := 1.8
K_RmLfom := 1  # Accounts for the exit into the flocculator from the straight Lfom.
K_PipeEnt := 0.5  # K.ent is the K value for a pipe entrance
K_PipeExit := 1
K_Sum(N_Elbow45, N_Elbow90, N_TeeRun, N_TeeBr, GateValve, GlobeValve, AngleValve, CheckValveConv, CheckValveBall) :=
    K_2 ← N_Elbow45*K_El45 + N_Elbow90*K_El90
    K_3 ← K_TeeFlowRun*N_TeeRun + K_TeeFlowBr*N_TeeBr
    K_4 ← GateValve*K_GateValve + GlobeValve*K_GlobeValve + AngleValve*K_AngleValve + CheckValveConv*K_ChkValveConv + CheckValveBall*K_ChkValveBall
    K_Sum ← K_2 + K_3 + K_4
    return K_Sum
K_FiEntrancePipe := K_El90 + K_PipeEnt + K_PipeExit = 2.4
K_RMGateVin := .25
# Drain Channels
Slope_PlantDC :=
    (1 %) if EN_DoubleTrain == 0
    (2 %) otherwise
Slope_EtDC :=
    (1 %) if EN_DoubleTrain == 0
    (2 %) otherwise
W_EtDCMin := 20 cm
