# It is time for a new design algorithm for flocculators. For the past 10 years we designed flocculators knowing that 2 m deep vertical flocculators had very high H/S ratios especially for low flow rates and thus were inherently inefficient. We designed to accommodate that inefficiency because the plan view area of the vertical flocculators was smaller than any other design options. We recently obtained experimental confirmation that operating at higher energy dissipation rates in the flocculator should be acceptable. If we increase the energy dissipation rate it will make the H/S ratio even higher. By increasing the energy dissipation rate and simultaneously increasing the efficiency we can produce much smaller flocculators. The design that I propose (40 cm of head loss and collision potential of 70 m^2/3) below only increases the maximum energy dissipation rate from 10 mW/kg up to 22 mW/kg. The residence time is reduced to 6.1 minutes. It is important to note that at this time we are not proposing to reduce the collision potential. We have experimental results suggesting that 1 minute flocculation is viable when coupled with a floc blanket. The cost of the flocculators will already be a very small fraction of the overall plant cost and thus further reductions in flocculator volume will not have as significant an impact on the plant cost.
# We assume a reasonable head loss as the starting point for this design. Our earlier designs began with a max energy dissipation rate as the primary constraint. Here we use head loss to recognize that cost optimization is an important parameter. Our cost analysis suggested that increasing the head loss to between 40 and 60 cm would be economical with the most cost effective head loss increasing with flow rate. For simplicity we will use a constant head loss for our designs with the option of having expert users adjust the head loss if a hydraulic design requires less head loss to achieve a viable gravity powered plant design.
# Design Algorithm steps
# Calculate the total volume of flocculator given head loss and collision potential
# Calculate the number of channels by taking the total width and dividing by the maximum channel width
# Calculate the channel width (total width over number of channels)
# Calculate the minimum number of obstacles and spacing between obstacles by assuming a maximum H/S ratio
# Use the actual H/S ratio based on obstacle spacing to calculate the spacing between baffles
# Calculate the obstacle width to obtain the same jet expansion conditions as produced by the 180 degree bend.
#
# This algorithm does not yet handle the integer number of baffles in a channel or the thickness of the baffles.
HL_Floc := 40 cm
# This is a significant increase from our current designs. We will need to ensure that the increased static load on the baffles can be handled without difficulty. This may require more closely spaced pipe spacers. I am proposing that we use 40 cm for our next designs.
# This is the new design target that will produce the same collision potential as the old targer of 75 m^2/3. The new system of equations estimates the flocculation efficiency to be slighly lower than what we had calculated prior to 2014. Thus the two changes cancel out and produce similar collision potential.
ψ := 70 m^(2/3)
H_FlocEnd := 2 m
Q := 50*L/s  # random flow rate for calculation checks
Π_VC := 0.62
Π_PlaneJet := 0.225
Π_VCBaffle := Π_VC^2
W_PCSheet := 42 in = 1.0668 m
W_FlocMinBod := W_PCSheet/2 = 0.5334 m
W_FlocMaxBod := W_PCSheet
ν_Water := 1*mm^2/s
K_B := (1/Π_VCBaffle - 1)^2 = 2.56466
# We need an estimate of the length of the sed tanks as an input for this design. I've created an estimate based on a 5 L/s sed tank. Currently I am assuming that we only build one size of sed tank between 10 L/s and 100 L/s. We might opt for a longer sed tank for high flow rates to accommodate the filters that would be placed along the length of the last sed tank for parallel treatment trains above approximately 100 L/s. That functional dependency on Q can be added here if needed, but ultimately L.Sed will be calculated first in the sed tank design file. The sed tank for low flow rates also needs to be reviewed. I've estimated it here assuming low flow channel width for sed tank inlet is 0.6m. When this file is implemented in the design tool it will come after the sed tank design and thus these values will be known.
V_SedUp := 1*mm/s
# The first term estimates sed tank length assuming two sed tanks for low flow rates.
fL_Sed(Q) := min(Q/(2*V_SedUp*W_PCSheet) + 0.6 m, 5.7 m)
# Thickness of the floc baffles. This isn't included yet in the algorithm. It will have a small effect on the design.
T_Baffle := 2 mm
Π_HSMin := 3
# The precise value of the maximum H/S ratio that has full efficiency is given below.
Π_HSTransition := Π_VCBaffle^4*K_B/Π_PlaneJet^3 = 4.91605
# It might be reasonable to allow for some Π.HS values that are greater than the value calculated above especially since the efficiency won't be affected that quickly. I think we need to have a slighly higher maximum H/S ratio so that creating a viable design is always possible.
Π_HSMax := 6
# The ratio of maximum to average energy dissipation rate is given below. We end up not using this equation because we always are in the range where the ratio is close to 2.
fα_ε(Π_HS) := max(Π_PlaneJet^3/Π_VCBaffle^4*2*Π_HS/K_B, 2)
α_ε := 2  # Define this for all subsequent analysis because we are assuming that our design will be in the high efficiency range.
# Calculate average energy dissipation rate from the target head loss.
fε_Ave(HL_Floc, ψ) := (g*HL_Floc/(ψ*α_ε^(1/6)))^(3/2)
ε_Max := fε_Ave(HL_Floc, ψ)*α_ε = 22.3098 mW/kg
HL_Graph := 5 cm, 6 cm .. 80 cm
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# At a head loss of 40 cm the maximum energy dissipation rate is only 22 mW/kg. This is double our previous design value.
# We can compare this design to traditional design values.
G_Ave(HL_Floc, ψ) := sqrt(fε_Ave(HL_Floc, ψ)/ν_Water)
G_Ave(HL_Floc, ψ) = 105.617 1/s
# Calculate the maximum flow rate that we can handle with a vertical flow flocculator given the depth and max channel width. This maximum occurs when the spacing between baffles becomes so large that the H/S ratio is less than 3.
Q_Max := (2*H_FlocEnd*fε_Ave(HL_Floc, ψ)/K_B)^(1/3)*W_FlocMaxBod*H_FlocEnd/Π_HSMin = 184.285 L/s
Q_Graph := 5*L/s, 10*L/s .. Q_Max
# This is the range of designs I'm exploring in this worksheet. Lower flow rates will have shorter sed tanks and the shorter sed tanks may provide a good location for entrance tank and grit chamber.
Π_HSGraph := 3, 4 .. 40
fα_ψ(Π_HS) := 1/fα_ε(Π_HS)^(1/6)
fα_ψ(Π_HSMin) = 0.890899
fα_ψ(Π_HSTransition) = 0.890899
α_ψ := fα_ψ(Π_HSMin)
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fθ_Floc(ψ, HL_Floc) := ψ/(fε_Ave(HL_Floc, ψ)^(1/3)*α_ψ)
# The residence time is no longer a function of flow rate because all flocculators will be designed for full efficiency.
θ_Floc := fθ_Floc(ψ, HL_Floc)
θ_Floc = 5.86088 min
# This residence time is shorter than traditional design guidelines, but it doesn't make any sense to compare mechanical and hydraulic flocculators because mechanical flocculators most likely have their performance limited by short circuiting. Mechanical flocculators are arbitrary flow reactors that too often approach completely mixed flow reactors. Thus mechanical flocculators will always require a high residence time to reduce the effect of this short circuiting. Hydraulic flocculators are only limited by their ability to produce collisions. Our new design algorithm achieves very uniform energy dissipation rates and thus the AguaClara design can have the smallest flocculators and still achieve high performance.
# Next we calculate the total width of all of the channels given the length and depth of the flocculator. The total volume of th flocculator is obtained by multiplying the residence time by the flow rate.
fW_FlocTotal(Q, ψ, HL_Floc) := Q*fθ_Floc(ψ, HL_Floc)/(H_FlocEnd*fL_Sed(Q))
W_FlocTotal := fW_FlocTotal(Q, ψ, HL_Floc) = 1.54234 m
# The channel width is contrained by the minimum constructable width (1/2 sheet), the maximum width (full baffle sheet) and by the minimum width that achieves an H/S ratio greater than 3.
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# The channel width must be greater than 1/2 of the plate width and greater than the minimum width to achieve a Π.HS>3.
fW_FlocMin(H_FlocEnd, K_B, Q, HL_Floc, ψ) := max(Π_HSMin*(K_B/(2*H_FlocEnd*fε_Ave(HL_Floc, ψ)))^(1/3)*Q/H_FlocEnd, W_FlocMinBod)
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# The envelope created by these two curves represents the possible design space. Now we can optimize the channel width based on the length and the target flocculator volume.
#
# We determined years ago with cost analysis that it makes more sense to minimize the number of channels and the plan view area of the flocculator rather than trying to maximize the use of the polycarbonate baffle material.
#
# The number of channels calculation will need to modified if part of the first flocculator channel is used for grit removal.
#
# Now we calculate the minimum number of channels given the total flocculator width and the maximum channel width. We round up because otherwise we would occasionally require channels that are wider than a polycarbonate sheet.
fN_ChannelsMin(H_FlocEnd, K_B, Q, HL_Floc, ψ) := ceil(fW_FlocTotal(Q, ψ, HL_Floc)/W_FlocMaxBod)
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# Given the number of channels we can now calculate the width of each channel. We add the constraint that the channel width must be at least as wide as the minimum channel width to handle the case where the flocculator volume is less than the smallest channel.
# The max function is required to make sure that we don't specify a channel narrower than the minimum width for the very low flow rates where the length of the sedimentation tank is longer than is required for the flocculator.
fW_Floc(H_FlocEnd, K_B, Q, HL_Floc, ψ) := max(fW_FlocTotal(Q, ψ, HL_Floc)/fN_ChannelsMin(H_FlocEnd, K_B, Q, HL_Floc, ψ), W_FlocMinBod)
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# Our design falls in the middle of the available design envelope. It is possible that for low flow rates plants the flocculator wouldn't even need to be as long as one sed tank. We will get some design failures for very high flow rates where the minimum and the maximum channel widths converge because the number of channels must be an integer.
# Find the minimum flow rate that doesn't require obstacles given the channel width as calculated above. The minimum flow rate occurs when the H/S ratio is maximum. Note that we are not using the transition H/S ratio here, but are using a slightly higher H/S ratio to give mor design flexibility.
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fQ_MinNoObstacles(H_FlocEnd, K_B, HL_Floc, ψ) := (2*H_FlocEnd*fε_Ave(HL_Floc, ψ)/K_B)^(1/3)*fW_Floc(H_FlocEnd, K_B, Q, HL_Floc, ψ)*H_FlocEnd/Π_HSMax
Q_MinNoObstacles := fQ_MinNoObstacles(H_FlocEnd, K_B, HL_Floc, ψ) = 66.6081 L/s
# For all flows below Q.MinNoObstacles it will be necessary to use additional flow contractions to maintain a high efficiency flocculator.
# Find the maximum distance between obstacles. In this analysis H is the distance between obstacles rather than the depth of water.
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fH_FlocObstacleMax(K_B, Q, HL_Floc, ψ) := (K_B/(2*fε_Ave(HL_Floc, ψ)))^(1/4)*(Π_HSMax*Q/fW_Floc(H_FlocEnd, K_B, Q, HL_Floc, ψ))^(3/4)
fH_FlocObstacleMax(K_B, Q_MinNoObstacles, HL_Floc, ψ) = 1.61292 m
# Find the minimum number of expansions per baffle.
fN_Obstacles(K_B, Q, HL_Floc, ψ) := ceil(H_FlocEnd/fH_FlocObstacleMax(K_B, Q, HL_Floc, ψ))
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# This number of obstacles includes the expansion created by the baffle. Calculate the distance between expansions.
fH_Obstacles(K_B, Q, HL_Floc, ψ) := H_FlocEnd/fN_Obstacles(K_B, Q, HL_Floc, ψ)
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# Now we can calculate the spacing between baffles. Note that in this equation we now use the distance between expansions as calculated above rather than the water depth for H.
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fS_Floc(H_FlocEnd, K_B, Q, HL_Floc, ψ) := (K_B/(2*fH_Obstacles(K_B, Q, HL_Floc, ψ)*fε_Ave(HL_Floc, ψ)))^(1/3)*(Q/fW_Floc(H_FlocEnd, K_B, Q, HL_Floc, ψ))
# The obstacles will block the flow such that the contraction occupies Π_VCBaffle = 0.3844of the width of the space between the baffles. These obstacles could be placed against the wall of the channel or against one of the baffles. In the design below we assume that the obstacles are placed against one of the baffles.
fW_FlocObstacleWake(H_FlocEnd, K_B, Q_Graph, HL_Floc, ψ) := fS_Floc(H_FlocEnd, K_B, Q_Graph, HL_Floc, ψ)*(1 - Π_VCBaffle)
Q_Obstacle := 10*L/s, 15*L/s .. Q_MinNoObstacles
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# This graph shows the channel width, the spacing between baffles, and the amount of the spacing that must be blocked by the obstacle (this includes any vena contracta effect).
# What are these obstacles made of? If the obstacles create wakes that are larger than the obstacle, then we need to account for that in the design. The obstacle should be against one of the baffles so that only one contraction is produced by each obstacle. This maximizes the distance for the expansion and thus minimizes the number of obstacles needed. The obstacles should shed flocs. Thus the obstacles must have a slope of at least 45 degrees.
# Next calculate the collision potential per obstacle.
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fψ_Obstacle(K_B, Q, HL_Floc, ψ) := (K_B^2*fH_Obstacles(K_B, Q, HL_Floc, ψ)^4/(4*α_ε))^(1/6)
# The function below calculates the number of baffles required given the total collision potential constraint and the number of expansions per baffle.
fN_BafflesSpaces(H_FlocEnd, K_B, Q, HL_Floc, ψ) := ψ/(fψ_Obstacle(K_B, Q, HL_Floc, ψ)*fN_Obstacles(K_B, Q, HL_Floc, ψ))
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# The number of baffles required is substantially fewer than with our previous design. We are getting much more collision potential per baffle with this new design. In our previous designs the number of baffles INCREASED as the flow rate decreased due to the inefficiency at low flow rates. This new design has a reduction in the number of baffles as the flow rate decreases. If we can add obstacles that cost less than a baffle, then this new design will be very cost effective.
#
# The fluid velocity is a traditional design target and thus we can compare our design with tradition.
fV_Floc(H_FlocEnd, K_B, Q, HL_Floc, ψ) := Q/(fS_Floc(H_FlocEnd, K_B, Q, HL_Floc, ψ)*fW_Floc(H_FlocEnd, K_B, Q, HL_Floc, ψ))
V_MaxSchulz := 0.3*m/s
V_Max10State := 1.5*ft/s = 0.4572 m/s
V_MinSchulz := 0.1*m/s
V_Min10State := 0.5*ft/s = 0.1524 m/s
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# The graph above shows the ten state standards and Shulz and Okun recommendations for velocity of water in a hydraulic flocculator. This shows that this design is below the maximum velocity guidelines and this confirms that we aren't yet using energy dissipation rates that exceed the traditional guidelines. The velocity in the flocculator increases with the target head loss.
# Head loss calculations to confirm that we are getting the head loss that we set initially.
fHL_Floc(H_FlocEnd, K_B, Q, HL_Floc, ψ) := K_B*(Q/(fS_Floc(H_FlocEnd, K_B, Q, HL_Floc, ψ)*fW_Floc(H_FlocEnd, K_B, Q, HL_Floc, ψ)))^2/(2*g)*fN_BafflesSpaces(H_FlocEnd, K_B, Q, HL_Floc, ψ)*fN_Obstacles(K_B, Q, HL_Floc, ψ)
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# All of the designs generate the target head loss.
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HL := ψ*fε_Ave(HL_Floc, ψ)^(2/3)*α_ε^(1/6)/g = 0.4 m
# Below is the total length of all of the channels
fL_FlocTotal(H_FlocEnd, K_B, Q, HL_Floc, ψ) := fN_BafflesSpaces(H_FlocEnd, K_B, Q, HL_Floc, ψ)*fS_Floc(H_FlocEnd, K_B, Q, HL_Floc, ψ)
# Below is the channel length that accounts for the possibility of a channel that is shorter than the sedimentation tank
fL_Floc(Q, ψ, HL_Floc) := min(Q*fθ_Floc(ψ, HL_Floc)/(H_FlocEnd*W_FlocMinBod), fL_Sed(Q))
# The graph below shows the number of channels required for each flow rate. The very lowest flow rates require less than one full channel. This analysis will need to be updated if some of the first flocculator channel is used for grit removal. This is a confirmation of the previous estimate of the number of channels.
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# Now we check to see if the design contraints meet the H/S ratio.
fΠ_HSCheck(H_FlocEnd, K_B, Q, HL_Floc, ψ) := fH_Obstacles(K_B, Q, HL_Floc, ψ)/fS_Floc(H_FlocEnd, K_B, Q, HL_Floc, ψ)
# Below is the equation for H/S based on the channel depth. This is for comparison with our previous designs when we didn't use obstacles.
fΠ_HWaterSCheck(H_FlocEnd, K_B, Q, HL_Floc, ψ) := H_FlocEnd/fS_Floc(H_FlocEnd, K_B, Q, HL_Floc, ψ)
y := 0 .. 20  # Used to create the vertical line for the division between with and without obstacles.
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# The H/S ratio based on the water depth is still very high for small flow rate flocculators. However, if we use H defined as the distance between flow expansions, then most of the designs fall between 3 and 6.
# The vertical line is the minimum flow that doesn't require obstacles. The maximum flow rate plotted is the maximum flow rate that can be handled given the depth and width of the flocculator channel. Note that the H/S ratio is below the minimum at the highest flow rates. This is a design failure and is the result of the combination of channel length and the lack of flexibility in design as the only available channel width becomes the full width of the polycarbonate sheets.
# Design the sloped obstacles. The first step is to determine the vena contracta coefficient as a function of the angle of the obstacle relative to the fluid flow.
Π_VC90 := Π_VC = 0.62  # vena contracta for a 90 degree change in flow direction
α_FlocObs := 45 deg  # Angle between the baffle and the obstacle
Π_VCα(α) := Π_VC90^(α/(90 deg))
# Estimate of the vena contracta coefficient. This is the same relationship that we use to determine that the vena contracta coefficient for a 180 degree bend is 0.62^2.
Π_VCα(α_FlocObs) = 0.787401  # vena contracta on the way down
Π_VCα(π - α_FlocObs) = 0.488188  # vena contracta on the way up
# Calculate the true width of the obstacle (not the projected width). We need a drawing here and a check on this analysis to make sure the geometry is right.
fW_Obstacle(H_FlocEnd, K_B, Q, HL_Floc, ψ, α, Δα_Flow) := fW_FlocObstacleWake(H_FlocEnd, K_B, Q, HL_Floc, ψ)*Π_VCα(Δα_Flow)/sin(α)
W_ObstacleDown := fW_Obstacle(H_FlocEnd, K_B, Q, HL_Floc, ψ, α_FlocObs, α_FlocObs) = 0.21611 m
W_ObstacleUp := fW_Obstacle(H_FlocEnd, K_B, Q, HL_Floc, ψ, α_FlocObs, 180 deg - α_FlocObs) = 0.133988 m
# The obstacles are pointed downward and need to be wider on the down flow baffles because they create less of a vena contracta than they do on the upflow baffles. The obstacles should always be on the side of the previous (upstream) vena contracta to maximize the flow path length.
# Below are the summary equations with results for a particular flow rate and head loss.
Q := 4*L/s
H_FlocEnd := 2 m
HL_Floc := 20 cm
fε_Ave(HL_Floc, ψ) = 3.94386 mW/kg
G_Ave(HL_Floc, ψ) = 62.8002 1/s
fθ_Floc(ψ, HL_Floc) = 8.28854 min
fW_Floc(H_FlocEnd, K_B, Q, HL_Floc, ψ) = 0.5334 m
fS_Floc(H_FlocEnd, K_B, Q, HL_Floc, ψ) = 0.0699863 m
fN_Obstacles(K_B, Q, HL_Floc, ψ) = 5  # This includes the expansion at the 180 degree bend.
# The flocculator may be shorter than the sed tank for very low flow rates. Note that this doesn't account for the thickness of the plates yet.
fL_Floc(Q, ψ, HL_Floc) = 1.86469 m
fε_Ave(HL_Floc, ψ) = 3.94386 mW/kg
W_ObstacleDown := fW_Obstacle(H_FlocEnd, K_B, Q, HL_Floc, ψ, α_FlocObs, α_FlocObs) = 0.0479759 m
W_ObstacleUp := fW_Obstacle(H_FlocEnd, K_B, Q, HL_Floc, ψ, α_FlocObs, 180 deg - α_FlocObs) = 0.029745 m
fV_Floc(H_FlocEnd, K_B, Q, HL_Floc, ψ) = 0.10715 m/s
fN_BafflesSpaces(H_FlocEnd, K_B, Q, HL_Floc, ψ) = 26.6436
fH_Obstacles(K_B, Q, HL_Floc, ψ) = 0.4 m
