# Flocculator AutoCAD
# Layers
FlocTankLayer := layer_new("FlocTankCon", grey)
SelectFlocTank := SelectLayer("FlocTankCon")
FlocTankFrz := FreezeLayer("FlocTankCon")
SubtractFromFlocTank := SubtractF(["FlocTankCon"], "DeleteMe")
FlocDrainPipeLayer := layer_new("FlocDrainPipePlu", blue)
SelectFlocDrainPipe := SelectLayer("FlocDrainPipePlu")
FlocDrainPipeFrz := FreezeLayer("FlocDrainPipePlu")
FlocDrainFittingLayer := layer_new("FlocDrainFittingPlu", green)
SelectFlocDrainFitting := SelectLayer("FlocDrainFittingPlu")
FlocDrainFittingFrz := FreezeLayer("FlocDrainFittingPlu")
FlocDrainRemovableLayer := layer_new("FlocDrainRemovablePlu", red)
SelectFlocDrainRemovable := SelectLayer("FlocDrainRemovablePlu")
FlocDrainRemovableFrz := FreezeLayer("FlocDrainRemovablePlu")
FlocBaffleLayer := layer_new("FlocModBaffles", ltpurple)
SelectFlocBaffle := SelectLayer("FlocModBaffles")
FlocBaffleFrz := FreezeLayer("FlocModBaffles")
FlocModHorizPipeLayer := layer_new("FlocModHorizPipePlu", blue)
SelectFlocModHorizPipe := SelectLayer("FlocModHorizPipePlu")
FlocModHorizPipeFrz := FreezeLayer("FlocModHorizPipePlu")
FlocModVertPipeLayer := layer_new("FlocModVertPipe", blue)
SelectFlocModVertPipe := SelectLayer("FlocModVertPipe")
FlocModVertPipeFrz := FreezeLayer("FlocModVertPipe")
FlocModSpacerLayer := layer_new("FlocModSpacerPlu", blue3)
SelectFlocModSpacer := SelectLayer("FlocModSpacerPlu")
FlocModSpacerFrz := FreezeLayer("FlocModSpacerPlu")
SubtractFromFlocModSpacer := SubtractF(["FlocModSpacerPlu"], "DeleteMe")
FlocModSpacerALayer := layer_new("FlocModSpacerAPlu", blue3)
SelectFlocModSpacerA := SelectLayer("FlocModSpacerAPlu")
FlocModSpacerAFrz := FreezeLayer("FlocModSpacerAPlu")
FlocModSpacerBLayer := layer_new("FlocModSpacerBPlu", blue3)
SelectFlocModBSpacer := SelectLayer("FlocModSpacerBPlu")
FlocModSpacerBFrz := FreezeLayer("FlocModSpacerBPlu")
FlocModSpacerCLayer := layer_new("FlocModSpacerBPlu", blue3)
SelectFlocModCSpacer := SelectLayer("FlocModSpacerBPlu")
FlocModSpacerCFrz := FreezeLayer("FlocModSpacerBPlu")
FlocModFittingLayer := layer_new("FlocModFittingPlu", green)
SelectFlocModFitting := SelectLayer("FlocModFittingPlu")
FlocModFittingFrz := FreezeLayer("FlocModFittingPlu")
FlocRMFittingLayer := layer_new("FlocRMFittingPlu", green)
SelectFlocRMFitting := SelectLayer("FlocRMFittingPlu")
FlocRMFittingFrz := FreezeLayer("FlocRMFittingPlu")
FlocRMOrificeLayer := layer_new("FlocRMOrifice", red)
SelectFlocRMOrifice := SelectLayer("FlocRMOrifice")
FlocRMOrificeFrz := FreezeLayer("FlocRMOrifice")
SubtractFromFlocRMOrifice := SubtractF(["FlocRMOrifice"], "DeleteMe")
FlocRMOrificeRestrainerLayer := layer_new("FlocRMOrificeRestrainer", blue)
SelectFlocRMOrificeRestrainer := SelectLayer("FlocRMOrificeRestrainer")
FlocRMOrificeRestrainerFrz := FreezeLayer("FlocRMOrificeRestrainer")
FlocDrainFittingLayer := layer_new("FlocDrainFittingPlu", green)
SelectFlocDrainFitting := SelectLayer("FlocDrainFittingPlu")
FlocDrainFittingFrz := FreezeLayer("FlocDrainFittingPlu")
FlocDrainPipeLayer := layer_new("FlocDrainPipePlu", blue)
SelectFlocDrainPipe := SelectLayer("FlocDrainPipePlu")
FlocDrainPipeFrz := FreezeLayer("FlocDrainPipePlu")
FlocDrainRemovableLayer := layer_new("FlocDrainRemovablePlu", red)
SelectFlocDrainRemovable := SelectLayer("FlocDrainRemovablePlu")
FlocDrainRemovableFrz := FreezeLayer("FlocDrainRemovablePlu")
FlocObsDownLayer := layer_new("FlocObsDownPipe", blue2)
SelectFlocObsDown := SelectLayer("FlocObsDownPipe")
FlocObsDownFrz := FreezeLayer("FlocObsDownPipe")
SubtractFromFlocObsDown := SubtractF(["FlocObsDownPipe"], "DeleteMe")
FlocObsUpLayer := layer_new("FlocObsUpPipe", blue2)
SelectFlocObsUp := SelectLayer("FlocObsUpPipe")
FlocObsUpFrz := FreezeLayer("FlocObsUpPipe")
SubtractFromFlocObsUp := SubtractF(["FlocObsUpPipe"], "DeleteMe")
# Flocculator masonry
# Origins
Floc_Origin := [Plant_Origin[0]; Plant_Origin[1] + N_SedTanks*(W_Sed + T_PlantWall); Z_FlocBottom]
Floc_Dim := [L_Sed; N_FlocChannels*(W_FlocChannel + T_PlantWall) - T_PlantWall; H_Floc]
FlocChannelWall_Origin := [Floc_Origin[0] - L_Sed - T_PlantWall; Floc_Origin[1] + W_FlocChannel; Floc_Origin[2]]
FlocChannelWall_Dim := [L_Sed + 2*T_PlantWall; T_PlantWall; H_Floc]
FlocPort1_Origin := Floc_Origin + [-W_FlocPort; W_FlocChannel; 0 m]
FlocPort2_Origin := Floc_Origin + [-L_Sed; 2*W_FlocChannel + T_PlantWall; 0 m]
FlocPort_Dim := [W_FlocPort; T_PlantWall; H_FlocPort]
SedChannelOpening_Origin := Floc_Origin + [-L_Sed; 0 m; H_Floc]
SedChannelOpening_Dim := [W_SedInletChannelPreWeir; -T_PlantWall; Z_SedChannelBottom - Z_FlocTop]
FlocSlabCut_Origin := Floc_Origin + [T_PlantWall; -T_PlantWall; -T_FlocSlab]
FlocSlabCut_Dim := [-2*T_PlantWall - L_Sed; T_PlantWall + N_FlocChannels*(W_FlocChannel + T_PlantWall); -T_PlantWall]
FlocEtCut_Origin := Floc_Origin + [-L_Floc - T_PlantWall - zc; (N_FlocChannels - 1)*(W_FlocChannel + T_PlantWall); -T_FlocSlab - zc]
FlocEtCut_Dim := [zc + L_Et + 2*T_PlantWall; W_FlocChannel + T_PlantWall; zc + T_FlocSlab + H_Floc + zc]
# Masonry
FlocTank := Tank(Floc_Origin, Floc_Dim, T_PlantWall)
FlocChannelWall := BoxF(FlocChannelWall_Origin, FlocChannelWall_Origin + FlocChannelWall_Dim, [0; 0; 0]*deg)
ArrayFlocWall := ArrayLast(N_FlocChannels - 1, 1, W_FlocChannel + T_PlantWall)
FlocTankScript := stack(FlocTankLayer, FlocTank, FlocChannelWall, ArrayFlocWall, Union_All, FlocTankFrz)
# Masonry cuts
FlocPort1 := BoxF(FlocPort1_Origin, FlocPort1_Origin + FlocPort_Dim, [0; 0; 0]*deg)
ArrayFlocPort1 := ArrayLast(N_FlocChannels/2, 1, 2*(W_FlocChannel + T_PlantWall))
FlocPort2 := BoxF(FlocPort2_Origin, FlocPort2_Origin + FlocPort_Dim, [0; 0; 0]*deg)
ArrayFlocPort2 := ArrayLast(N_FlocChannels/2 - 1, 1, 2*(W_FlocChannel + T_PlantWall))
SedChannelOpening := BoxF(SedChannelOpening_Origin, SedChannelOpening_Origin + SedChannelOpening_Dim, [0; 0; 0]*deg)
FlocSlabCut := BoxF(FlocSlabCut_Origin, FlocSlabCut_Origin + FlocSlabCut_Dim, [0; 0; 0]*deg)
FlocEtCut := BoxF(FlocEtCut_Origin, FlocEtCut_Origin + FlocEtCut_Dim, [0; 0; 0]*deg)
FlocMasonryCutScript :=
    stack(FlocPort1, ArrayFlocPort1, FlocPort2, ArrayFlocPort2, SedChannelOpening, FlocSlabCut, FlocEtCut, GroupDelete, SubtractFromFlocTank) if N_FlocChannels > 2
    stack(FlocPort1, ArrayFlocPort1, SedChannelOpening, FlocSlabCut, FlocEtCut, GroupDelete, SubtractFromFlocTank) otherwise
FlocMasonryScript := stack(FlocTankScript, FlocMasonryCutScript)
# Module connector pipes
# Origins and lengths
FlocModConnectorLowA_Origin := Floc_Origin + [
    -S_FlocBaffle + SocketDepth(ND_FlocMod) + max(0 m, ShortTeeLength(ND_FlocMod) - ElbowRadius(ND_FlocMod));
    S_Fitting + outerradius(ND_FlocMod);
    min(S_FlocModPipeToEdge, Pi_FlocBaffle*S_FlocBaffle/2)
]  # A refers to even-numbered channels. C refers to the first channel. B are odd-numbered channels that are not the first channel.
L_FlocModConnectorLowA := L_Sed - S_FlocBaffle - ConRadius(ND_FlocMod) - ElbowRadius(ND_FlocMod) + SocketDepth(ND_FlocMod) + (ShortTeeLength(ND_FlocMod) - ElbowRadius(ND_FlocMod))
FlocModConnectorLowC_Origin := Floc_Origin + [
    -ConRadius(ND_FlocMod) - ElbowRadius(ND_FlocMod);
    S_Fitting + outerradius(ND_FlocMod) + (N_FlocChannels - 1)*(W_FlocChannel + T_PlantWall);
    min(S_FlocModPipeToEdge, Pi_FlocBaffle*S_FlocBaffle/2)
]
L_FlocModConnectorLowC := L_FlocModConnectorLowA - B_FlocBaffle*(N_FlocChannelBaffles - N_FlocFirstChannelBaffles)
FlocModConnectorMidA_Origin := Floc_Origin + [
    -S_FlocBaffle + SocketDepth(ND_FlocMod) + max(0 m, ElbowRadius(ND_FlocMod) - ShortTeeLength(ND_FlocMod));
    S_Fitting + outerradius(ND_FlocMod);
    Pi_FlocBaffle*S_FlocBaffle + (H_FlocBaffleLow - Pi_FlocBaffle*S_FlocBaffle)/max(2, N_FlocSpaceExpansions - 1)
]
L_FlocModConnectorMidA := L_Sed - S_FlocBaffle - ConRadius(ND_FlocMod) - ShortTeeLength(ND_FlocMod) + SocketDepth(ND_FlocMod)
FlocModConnectorMidC_Origin := Floc_Origin + [
    -ConRadius(ND_FlocMod) - ShortTeeLength(ND_FlocMod);
    S_Fitting + outerradius(ND_FlocMod) + (N_FlocChannels - 1)*(W_FlocChannel + T_PlantWall);
    Pi_FlocBaffle*S_FlocBaffle + (H_FlocBaffleLow - Pi_FlocBaffle*S_FlocBaffle)/max(2, N_FlocSpaceExpansions - 1)
]
L_FlocModConnectorMidC := L_FlocModConnectorMidA - B_FlocBaffle*(N_FlocChannelBaffles - N_FlocFirstChannelBaffles)
FlocModConnectorHighA_Origin := [FlocModConnectorLowA_Origin[0]; FlocModConnectorLowA_Origin[1]; Z_FlocTop - H_PlantFreeboard]
L_FlocModConnectorHighA := L_FlocModConnectorLowA
FlocModConnectorHighC_Origin := [FlocModConnectorLowC_Origin[0]; FlocModConnectorLowC_Origin[1]; Z_FlocTop - H_PlantFreeboard]
L_FlocModConnectorHighC := L_FlocModConnectorLowC
FlocModVertPipeLowA_Origin := FlocModConnectorLowA_Origin + [ElbowRadius(ND_FlocMod); 0 m; ElbowRadius(ND_FlocMod)]
FlocModVertPipeLowC_Origin := FlocModConnectorLowC_Origin + [ElbowRadius(ND_FlocMod); 0 m; ElbowRadius(ND_FlocMod)]
L_FlocModVertPipeLow := FlocModConnectorMidA_Origin[2] - FlocModConnectorLowA_Origin[2] - ElbowRadius(ND_FlocMod) - TeeLength(ND_FlocMod)/2
FlocModVertPipeHighA_Origin := FlocModConnectorMidA_Origin + [ShortTeeLength(ND_FlocMod); 0 m; TeeLength(ND_FlocMod)/2]
FlocModVertPipeHighC_Origin := FlocModConnectorMidC_Origin + [ShortTeeLength(ND_FlocMod); 0 m; TeeLength(ND_FlocMod)/2]
L_FlocModVertPipeHigh := FlocModConnectorHighA_Origin[2] - FlocModConnectorMidA_Origin[2] - ElbowRadius(ND_FlocMod) - TeeLength(ND_FlocMod)/2
# Connector pipes in odd-numbered channels (B)
ArrayFlocModYB := ArrayLast(max(N_FlocChannels/2 - 1, 1), 1, 2*(W_FlocChannel + T_PlantWall))
FlocModConnectorsB :=
    local ← view("t")
    for i ∈ 0 .. 2
        PipeLow ← PipeF(FlocModConnectorLowA_Origin + [
            0 m;
            i*(W_FlocChannel - 2*S_Fitting - outerdiameter(ND_FlocMod))/2 + W_FlocChannel + T_PlantWall;
            0 m
        ], L_FlocModConnectorLowA, [0; 0]*deg, ND_FlocMod, PS_Modules)
        PipesMid ←
            local2 ← view("t")
            for j ∈ 0 .. max(N_FlocSpaceExpansions - 2, 0)
                Pipe ← PipeF(FlocModConnectorMidA_Origin + [
                    0 m;
                    i*(W_FlocChannel - 2*S_Fitting - outerdiameter(ND_FlocMod))/2 + W_FlocChannel + T_PlantWall;
                    j*H_FlocObs
                ], L_FlocModConnectorMidA, [0; 0]*deg, ND_FlocMod, PS_Modules)
                local2 ← stack(local2, Pipe, ArrayFlocModYB)
            return local2
        PipeHigh ← PipeF(FlocModConnectorHighA_Origin + [
            0 m;
            i*(W_FlocChannel - 2*S_Fitting - outerdiameter(ND_FlocMod))/2 + W_FlocChannel + T_PlantWall;
            0 m
        ], L_FlocModConnectorHighA, [0; 0]*deg, ND_FlocMod, PS_Modules)
        local ← stack(local, PipeLow, ArrayFlocModYB, PipesMid, PipeHigh, ArrayFlocModYB)
    return local
FlocModVertPipesB :=
    local ← view("t")
    for i ∈ 0 .. 2
        PipeLow1 ← PipeF(FlocModVertPipeLowA_Origin + [
            0 m;
            i*(W_FlocChannel - 2*S_Fitting - outerdiameter(ND_FlocMod))/2 + W_FlocChannel + T_PlantWall;
            0 m
        ], L_FlocModVertPipeLow, [0; 90]*deg, ND_FlocMod, PS_Modules)
        PipeLow2 ← PipeF(FlocModVertPipeLowA_Origin + [
            -L_FlocModConnectorLowA - 2*ElbowRadius(ND_FlocMod);
            i*(W_FlocChannel - 2*S_Fitting - outerdiameter(ND_FlocMod))/2 + W_FlocChannel + T_PlantWall;
            0 m
        ], L_FlocModVertPipeLow, [0; 90]*deg, ND_FlocMod, PS_Modules)
        PipeMid
        PipeHigh1 ← PipeF(FlocModVertPipeHighA_Origin + [
            0 m;
            i*(W_FlocChannel - 2*S_Fitting - outerdiameter(ND_FlocMod))/2 + W_FlocChannel + T_PlantWall;
            0 m
        ], L_FlocModVertPipeHigh, [0; 90]*deg, ND_FlocMod, PS_Modules)
        PipeHigh2 ← PipeF(FlocModVertPipeHighA_Origin + [
            -L_FlocModConnectorLowA - 2*ElbowRadius(ND_FlocMod);
            i*(W_FlocChannel - 2*S_Fitting - outerdiameter(ND_FlocMod))/2 + W_FlocChannel + T_PlantWall;
            0 m
        ], L_FlocModVertPipeHigh, [0; 90]*deg, ND_FlocMod, PS_Modules)
        local ← stack(local, PipeLow1, ArrayFlocModYB, PipeLow2, ArrayFlocModYB, PipeHigh1, ArrayFlocModYB, PipeHigh2, ArrayFlocModYB)
    return local
MirrorFlocModX := MirrorAll([Floc_Origin[0] - L_Sed/2; Floc_Origin[1]], [Floc_Origin[0] - L_Sed/2; Floc_Origin[1] + zc], "y")
FlocModConnectorBScript :=
    stack(FlocModConnectorsB, FlocModVertPipesB, MirrorFlocModX) if N_FlocChannels > 2
    view("t") otherwise
# Connector pipes in first channel (C)
FlocModConnectorsC :=
    local ← view("t")
    for i ∈ 0 .. 2
        PipeLow ← PipeF(FlocModConnectorLowC_Origin + [0 m; i*(W_FlocChannel - 2*S_Fitting - outerdiameter(ND_FlocMod))/2; 0 m], L_FlocModConnectorLowC, [0; 0]*deg, ND_FlocMod, PS_Modules)
        PipeMid ← PipeF(FlocModConnectorMidC_Origin + [0 m; i*(W_FlocChannel - 2*S_Fitting - outerdiameter(ND_FlocMod))/2; 0 m], L_FlocModConnectorMidC, [0; 0]*deg, ND_FlocMod, PS_Modules)
        PipeHigh ← PipeF(FlocModConnectorHighC_Origin + [0 m; i*(W_FlocChannel - 2*S_Fitting - outerdiameter(ND_FlocMod))/2; 0 m], L_FlocModConnectorHighC, [0; 0]*deg, ND_FlocMod, PS_Modules)
        local ← stack(local, PipeLow, PipeMid, PipeHigh)
    return local
FlocModVertPipesC :=
    local ← view("t")
    for i ∈ 0 .. 2
        PipeLow1 ← PipeF(FlocModVertPipeLowC_Origin + [0 m; i*(W_FlocChannel - 2*S_Fitting - outerdiameter(ND_FlocMod))/2; 0 m], L_FlocModVertPipeLow, [0; 90]*deg, ND_FlocMod, PS_Modules)
        PipeLow2 ← PipeF(FlocModVertPipeLowC_Origin + [
            -L_FlocModConnectorLowC - 2*ElbowRadius(ND_FlocMod);
            i*(W_FlocChannel - 2*S_Fitting - outerdiameter(ND_FlocMod))/2;
            0 m
        ], L_FlocModVertPipeLow, [0; 90]*deg, ND_FlocMod, PS_Modules)
        PipeHigh1 ← PipeF(FlocModVertPipeHighC_Origin + [0 m; i*(W_FlocChannel - 2*S_Fitting - outerdiameter(ND_FlocMod))/2; 0 m], L_FlocModVertPipeHigh, [0; 90]*deg, ND_FlocMod, PS_Modules)
        PipeHigh2 ← PipeF(FlocModVertPipeHighC_Origin + [
            -L_FlocModConnectorLowC - 2*ElbowRadius(ND_FlocMod);
            i*(W_FlocChannel - 2*S_Fitting - outerdiameter(ND_FlocMod))/2;
            0 m
        ], L_FlocModVertPipeHigh, [0; 90]*deg, ND_FlocMod, PS_Modules)
        local ← stack(local, PipeLow1, PipeLow2, PipeHigh1, PipeHigh2)
    return local
FlocModConnectorCScript := stack(FlocModConnectorsC, FlocModVertPipesC)
# Connector pipes in even-numbered channels (A)
ArrayFlocModYA := ArrayLast(N_FlocChannels/2, 1, 2*(W_FlocChannel + T_PlantWall))
FlocModConnectorsA :=
    local ← view("t")
    for i ∈ 0 .. 2
        PipeLow ← PipeF(FlocModConnectorLowA_Origin + [0 m; i*(W_FlocChannel - 2*S_Fitting - outerdiameter(ND_FlocMod))/2; 0 m], L_FlocModConnectorLowA, [0; 0]*deg, ND_FlocMod, PS_Modules)
        PipeMid ← PipeF(FlocModConnectorMidA_Origin + [0 m; i*(W_FlocChannel - 2*S_Fitting - outerdiameter(ND_FlocMod))/2; 0 m], L_FlocModConnectorMidA, [0; 0]*deg, ND_FlocMod, PS_Modules)
        PipeHigh ← PipeF(FlocModConnectorHighA_Origin + [0 m; i*(W_FlocChannel - 2*S_Fitting - outerdiameter(ND_FlocMod))/2; 0 m], L_FlocModConnectorHighA, [0; 0]*deg, ND_FlocMod, PS_Modules)
        local ← stack(local, PipeLow, ArrayFlocModYA, PipeMid, ArrayFlocModYA, PipeHigh, ArrayFlocModYA)
    return local
FlocModVertPipesA :=
    local ← view("t")
    for i ∈ 0 .. 2
        PipeLow1 ← PipeF(FlocModVertPipeLowA_Origin + [0 m; i*(W_FlocChannel - 2*S_Fitting - outerdiameter(ND_FlocMod))/2; 0 m], L_FlocModVertPipeLow, [0; 90]*deg, ND_FlocMod, PS_Modules)
        PipeLow2 ← PipeF(FlocModVertPipeLowA_Origin + [
            -L_FlocModConnectorLowA - 2*ElbowRadius(ND_FlocMod);
            i*(W_FlocChannel - 2*S_Fitting - outerdiameter(ND_FlocMod))/2;
            0 m
        ], L_FlocModVertPipeLow, [0; 90]*deg, ND_FlocMod, PS_Modules)
        PipeHigh1 ← PipeF(FlocModVertPipeHighA_Origin + [0 m; i*(W_FlocChannel - 2*S_Fitting - outerdiameter(ND_FlocMod))/2; 0 m], L_FlocModVertPipeHigh, [0; 90]*deg, ND_FlocMod, PS_Modules)
        PipeHigh2 ← PipeF(FlocModVertPipeHighA_Origin + [
            -L_FlocModConnectorLowA - 2*ElbowRadius(ND_FlocMod);
            i*(W_FlocChannel - 2*S_Fitting - outerdiameter(ND_FlocMod))/2;
            0 m
        ], L_FlocModVertPipeHigh, [0; 90]*deg, ND_FlocMod, PS_Modules)
        local ← stack(local, PipeLow1, ArrayFlocModYA, PipeLow2, ArrayFlocModYA, PipeHigh1, ArrayFlocModYA, PipeHigh2, ArrayFlocModYA)
    return local
FlocModConnectorAScript := stack(FlocModConnectorsA, FlocModVertPipesA)
FlocModConnectorScript := stack(FlocModHorizPipeLayer, FlocModConnectorBScript, FlocModConnectorCScript, FlocModConnectorAScript, FlocModHorizPipeFrz)
# Module spacers
# Origins and lengths
FlocModSpacerLowA_Origin := FlocModConnectorLowA_Origin + [-SocketDepth(ND_FlocMod); 0 m; 0 m]
# A refers to even-numbered channels. C refers to the first channel. B are odd-numbered channels that are not the first channel.
L_FlocModSpacerLowA := L_FlocModConnectorLowA - 2*SocketDepth(ND_FlocMod)
FlocModSpacerLowC_Origin := FlocModConnectorLowC_Origin + [-SocketDepth(ND_FlocMod); 0 m; 0 m]
L_FlocModSpacerLowC := L_FlocModConnectorLowC - 2*SocketDepth(ND_FlocMod)
FlocModSpacerMidA_Origin := FlocModConnectorMidA_Origin + [-SocketDepth(ND_FlocMod); 0 m; 0 m]
L_FlocModSpacerMidA := L_FlocModConnectorMidA - 2*SocketDepth(ND_FlocMod)
FlocModSpacerMidC_Origin := FlocModConnectorMidC_Origin + [-SocketDepth(ND_FlocMod); 0 m; 0 m]
L_FlocModSpacerMidC := L_FlocModConnectorMidC - 2*SocketDepth(ND_FlocMod)
FlocModSpacerHighA_Origin := FlocModConnectorHighA_Origin + [-SocketDepth(ND_FlocMod); 0 m; 0 m]
L_FlocModSpacerHighA := L_FlocModConnectorHighA - 2*SocketDepth(ND_FlocMod)
FlocModSpacerHighC_Origin := FlocModConnectorHighC_Origin + [-SocketDepth(ND_FlocMod); 0 m; 0 m]
L_FlocModSpacerHighC := L_FlocModConnectorHighC - 2*SocketDepth(ND_FlocMod)
# Spacer pipes in odd-numbered channels (B)
FlocModSpacersB :=
    local ← view("t")
    for i ∈ 0 .. 2
        PipeLow ← PipeF(FlocModSpacerLowA_Origin + [
            0 m;
            i*(W_FlocChannel - 2*S_Fitting - outerdiameter(ND_FlocMod))/2 + W_FlocChannel + T_PlantWall;
            0 m
        ], L_FlocModSpacerLowA, [0; 0]*deg, ND_FlocSpacer, PS_Modules)
        PipeMid ← PipeF(FlocModSpacerMidA_Origin + [
            0 m;
            i*(W_FlocChannel - 2*S_Fitting - outerdiameter(ND_FlocMod))/2 + W_FlocChannel + T_PlantWall;
            0 m
        ], L_FlocModSpacerMidA, [0; 0]*deg, ND_FlocSpacer, PS_Modules)
        PipeHigh ← PipeF(FlocModSpacerHighA_Origin + [
            0 m;
            i*(W_FlocChannel - 2*S_Fitting - outerdiameter(ND_FlocMod))/2 + W_FlocChannel + T_PlantWall;
            0 m
        ], L_FlocModSpacerHighA, [0; 0]*deg, ND_FlocSpacer, PS_Modules)
        local ← stack(local, PipeLow, ArrayFlocModYB, PipeMid, ArrayFlocModYB, PipeHigh, ArrayFlocModYB)
    return local
FlocModSpacerBScript :=
    stack(FlocModSpacersB, MirrorFlocModX) if N_FlocChannels > 2
    view("t") otherwise
# Spacer pipes in first channel (C)
FlocModSpacersC :=
    local ← view("t")
    for i ∈ 0 .. 2
        PipeLow ← PipeF(FlocModSpacerLowC_Origin + [0 m; i*(W_FlocChannel - 2*S_Fitting - outerdiameter(ND_FlocMod))/2; 0 m], L_FlocModSpacerLowC, [0; 0]*deg, ND_FlocSpacer, PS_Modules)
        PipeMid ← PipeF(FlocModSpacerMidC_Origin + [0 m; i*(W_FlocChannel - 2*S_Fitting - outerdiameter(ND_FlocMod))/2; 0 m], L_FlocModSpacerMidC, [0; 0]*deg, ND_FlocSpacer, PS_Modules)
        PipeHigh ← PipeF(FlocModSpacerHighC_Origin + [0 m; i*(W_FlocChannel - 2*S_Fitting - outerdiameter(ND_FlocMod))/2; 0 m], L_FlocModSpacerHighC, [0; 0]*deg, ND_FlocSpacer, PS_Modules)
        local ← stack(local, PipeLow, PipeMid, PipeHigh)
    return local
FlocModSpacerCScript := FlocModSpacersC
# Connector pipes in even-numbered channels (A)
FlocModSpacersA :=
    local ← view("t")
    for i ∈ 0 .. 2
        PipeLow ← PipeF(FlocModSpacerLowA_Origin + [0 m; i*(W_FlocChannel - 2*S_Fitting - outerdiameter(ND_FlocMod))/2; 0 m], L_FlocModSpacerLowA, [0; 0]*deg, ND_FlocSpacer, PS_Modules)
        PipeMid ← PipeF(FlocModSpacerMidA_Origin + [0 m; i*(W_FlocChannel - 2*S_Fitting - outerdiameter(ND_FlocMod))/2; 0 m], L_FlocModSpacerMidA, [0; 0]*deg, ND_FlocSpacer, PS_Modules)
        PipeHigh ← PipeF(FlocModSpacerHighA_Origin + [0 m; i*(W_FlocChannel - 2*S_Fitting - outerdiameter(ND_FlocMod))/2; 0 m], L_FlocModSpacerHighA, [0; 0]*deg, ND_FlocSpacer, PS_Modules)
        local ← stack(local, PipeLow, ArrayFlocModYA, PipeMid, ArrayFlocModYA, PipeHigh, ArrayFlocModYA)
    return local
FlocModSpacerAScript := FlocModSpacersA
FlocModSpacerScript := stack(FlocModSpacerLayer, FlocModSpacerBScript, FlocModSpacerCScript, FlocModSpacerAScript, FlocModSpacerFrz)
# Origins
FlocModSpacerCommonLow_Origin := FlocBaffleLow_Origin(0) + [
    -T_FlocBaffle;
    S_Fitting + outerradius(ND_FlocMod);
    min(S_FlocModPipeToEdge, Pi_FlocBaffle*S_FlocBaffle/2)
]
FlocModSpacerALowLast_Origin := FlocModSpacerALow_Origin + [-(N_FlocChannelBaffles + 1)/2*2*B_FlocBaffle; 0 m; 0 m]
FlocModSpacerCommonMid_Origin := FlocModSpacerALow_Origin
FlocModSpacerAMidLast_Origin := FlocModSpacerAMid_Origin + [-(N_FlocChannelBaffles - 1)*B_FlocBaffle; 0 m; 0 m]
FlocModSpacerCommonHigh_Origin := [
    FlocBaffleHigh_Origin(0)[0] - T_FlocBaffle;
    FlocModSpacerALow_Origin[1];
    Z_FlocTop - H_PlantFreeboard
]
FlocModSpacerAHighFirst_Origin := [
    FlocModSpacerALow_Origin[0] + T_FlocBaffle + (ShortTeeLength(ND_FlocMod) - ElbowRadius(ND_FlocMod));
    FlocModSpacerAHigh_Origin[1];
    FlocModSpacerAHigh_Origin[2]
]
FlocModSpacerAHighLast_Origin := FlocModSpacerAHigh_Origin + [-(N_FlocChannelBaffles - 1)/2*2*B_FlocBaffle; 0 m; 0 m]
# Spacers common to all channels (line up in front view)
ArrayFlocSpacerLowX := ArrayLast(1, (min(N_FlocFirstChannelBaffles, N_FlocLastChannelBaffles - 1) + 1)/2, -2*B_FlocBaffle)
ArrayFlocSpacerMidX := ArrayLast(1, min(N_FlocFirstChannelBaffles, N_FlocLastChannelBaffles - 1) - 1, -B_FlocBaffle)
ArrayFlocSpacerHighX := ArrayLast(1, (min(N_FlocFirstChannelBaffles, N_FlocLastChannelBaffles - 1) - 1)/2, -B_FlocBaffle)
ArrayFlocModSpacerY := ArrayAll(N_FlocChannels, 1, W_FlocChannel + T_PlantWall)
FlocSpacersLowCommon :=
    local ← view("t")
    for i ∈ 0 .. 2
        Pipe ← PipeF(FlocModSpacerCommonLow_Origin + [0 m; i*(W_FlocChannel - 2*S_Fitting - outerdiameter(ND_FlocMod))/2; 0 m], 2*S_FlocBaffle + T_FlocBaffle, [0; 0]*deg, ND_FlocSpacer, PS_Modules)
        local ← stack(local, Pipe, ArrayFlocSpacerLowX)
    return local
FlocSpacersMidCommon :=
    local ← view("t")
    for i ∈ 0 .. 2
        Pipe ← PipeF(FlocModSpacerCommonMid_Origin + [0 m; i*(W_FlocChannel - 2*S_Fitting - outerdiameter(ND_FlocMod))/2; 0 m], S_FlocBaffle, [0; 0]*deg, ND_FlocSpacer, PS_Modules)
        local ← stack(local, Pipe, ArrayFlocSpacerMidX)
    return local
FlocSpacersHighCommon :=
    local ← view("t")
    for i ∈ 0 .. 2
        Pipe ← PipeF(FlocModSpacerCommonHigh_Origin + [0 m; i*(W_FlocChannel - 2*S_Fitting - outerdiameter(ND_FlocMod))/2; 0 m], S_FlocBaffle, [0; 0]*deg, ND_FlocSpacer, PS_Modules)
        local ← stack(local, Pipe, ArrayFlocSpacerHighX)
    return local
FlocCommonSpacerScript := stack(FlocModSpacerLayer, FlocSpacersLowCommon, FlocSpacersMidCommon, FlocSpacersHighCommon, ArrayFlocModSpacerY)
FlocSpacersLowB :=
    local ← view("t")
    for i ∈ 0 .. 2
        Pipe ← PipeF(FlocModSpacerALow_Origin + [
            0 m;
            i*(W_FlocChannel - 2*S_Fitting - outerdiameter(ND_FlocMod))/2 + W_FlocChannel + T_PlantWall;
            0 m
        ], 2*S_FlocBaffle + T_FlocBaffle, [0; 0]*deg, ND_FlocSpacer, PS_Modules)
        LastPipe ← PipeF(FlocModSpacerALowLast_Origin + [
            0 m;
            i*(W_FlocChannel - 2*S_Fitting - outerdiameter(ND_FlocMod))/2 + W_FlocChannel + T_PlantWall;
            0 m
        ], S_FlocBaffle - ElbowRadius(ND_FlocMod) - SocketDepth(ND_FlocMod) - ConRadius(ND_FlocMod), [0; 0]*deg, ND_FlocSpacer, PS_Modules)
        local ← stack(local, Pipe, ArrayFlocModSpacerLowX, LastPipe)
    return local
FlocSpacersMidB :=
    local ← view("t")
    for i ∈ 0 .. 2
        Pipe ← PipeF(FlocModSpacerAMid_Origin + [
            0 m;
            i*(W_FlocChannel - 2*S_Fitting - outerdiameter(ND_FlocMod))/2 + W_FlocChannel + T_PlantWall;
            0 m
        ], S_FlocBaffle, [0; 0]*deg, ND_FlocSpacer, PS_Modules)
        LastPipe ← PipeF(FlocModSpacerALowLast_Origin + [
            0 m;
            i*(W_FlocChannel - 2*S_Fitting - outerdiameter(ND_FlocMod))/2 + W_FlocChannel + T_PlantWall;
            0 m
        ], S_FlocBaffle - ShortTeeLength(ND_FlocMod) - SocketDepth(ND_FlocMod) - ConRadius(ND_FlocMod), [0; 0]*deg, ND_FlocSpacer, PS_Modules)
        local ← stack(local, Pipe, ArrayFlocModSpacerMidX)
    return local
FlocSpacersHighB :=
    local ← view("t")
    for i ∈ 0 .. 2
        Pipe ← PipeF(FlocModSpacerAHigh_Origin + [
            0 m;
            i*(W_FlocChannel - 2*S_Fitting - outerdiameter(ND_FlocMod))/2 + W_FlocChannel + T_PlantWall;
            0 m
        ], 2*S_FlocBaffle + T_FlocBaffle, [0; 0]*deg, ND_FlocSpacer, PS_Modules)
        local ← stack(local, Pipe, ArrayFlocModSpacerHighX)
    return local
FlocModSpacerBScript :=
    stack(FlocModSpacerBLayer, FlocSpacersLowB, FlocSpacersMidB, FlocSpacersHighB, ArrayFlocSpacersYB, MirrorFlocModX, FlocModSpacerBFrz) if N_FlocChannels > 2
    view("t") otherwise
# Baffles
# Baffle origins and dimensions
FlocBaffleLow_Origin(N) := Floc_Origin + [-S_FlocBaffle; N*(W_FlocChannel + T_PlantWall); 0 m]
FlocBaffleLow_Dim := [-T_SedPlate; W_FlocChannel; H_FlocBaffleLow]
FlocBaffleHigh_Origin(N) := Floc_Origin + [-2*S_FlocBaffle - T_SedPlate; N*(W_FlocChannel + T_PlantWall); Pi_FlocBaffle*S_FlocBaffle]
FlocBaffleHigh_Dim := [-T_SedPlate; W_FlocChannel; H_FlocBaffleHigh]
# Draw and array baffles
FlocBafflesLow :=
    Local ← view("t")
    for i ∈ 0 .. N_FlocChannels - 1
        Baffle ← BoxF(FlocBaffleLow_Origin(i), FlocBaffleLow_Origin(i) + FlocBaffleLow_Dim, [0; 0; 0]*deg)
        Array ←
            ArrayLast(1, N_FlocLastChannelBaffles/2, -2*B_FlocBaffle) if i == 0
            ArrayLast(1, (N_FlocFirstChannelBaffles + 1)/2, -2*B_FlocBaffle) if i == (N_FlocChannels - 1)
            ArrayLast(1, (N_FlocChannelBaffles + 1)/2, -2*B_FlocBaffle) otherwise
        Local ← stack(Local, Baffle, Array)
    return Local
FlocBafflesHigh :=
    Local ← view("t")
    for i ∈ 0 .. N_FlocChannels - 1
        Baffle ← BoxF(FlocBaffleHigh_Origin(i), FlocBaffleHigh_Origin(i) + FlocBaffleHigh_Dim, [0; 0; 0]*deg)
        Array ←
            ArrayLast(1, N_FlocLastChannelBaffles/2, -2*B_FlocBaffle) if i == 0
            ArrayLast(1, (N_FlocFirstChannelBaffles - 1)/2, -2*B_FlocBaffle) if i == (N_FlocChannels - 1)
            ArrayLast(1, (N_FlocChannelBaffles - 1)/2, -2*B_FlocBaffle) otherwise
        Local ← stack(Local, Baffle, Array)
    return Local
FlocBaffleScript := stack(FlocBafflesLow, FlocBafflesHigh, GroupDelete, SubtractFromFlocModSpacer, FlocBaffleLayer, FlocBafflesLow, FlocBafflesHigh, FlocBaffleFrz)
# Module fittings
# Origins
FlocModElbowLowA_Origin := FlocModConnectorLowA_Origin
FlocModElbowHighA_Origin := FlocModConnectorHighA_Origin
FlocModTeeA_Origin := FlocModConnectorMidA_Origin
FlocModElbowLowC_Origin := FlocModConnectorLowC_Origin
FlocModElbowHighC_Origin := FlocModConnectorHighC_Origin
FlocModTeeC_Origin := FlocModConnectorMidC_Origin
# Floc fittings B (odd-numbered channels not first)
FlocElbowsLowB :=
    local ← view("t")
    for i ∈ 0 .. 2
        Elbow1 ← ElbowF(FlocModElbowLowA_Origin + [
            0 m;
            i*(W_FlocChannel - 2*S_Fitting - outerdiameter(ND_FlocMod))/2 + W_FlocChannel + T_PlantWall;
            0 m
        ], [-90; 0; 90]*deg, ND_FlocMod, PS_Modules)
        Elbow2 ← ElbowF(FlocModElbowLowA_Origin + [
            -L_FlocModConnectorLowA;
            i*(W_FlocChannel - 2*S_Fitting - outerdiameter(ND_FlocMod))/2 + W_FlocChannel + T_PlantWall;
            0 m
        ], [90; 0; -90]*deg, ND_FlocMod, PS_Modules)
        local ← stack(local, Elbow1, ArrayFlocModYB, Elbow2, ArrayFlocModYB)
    return local
FlocTeesB :=
    local ← view("t")
    for i ∈ 0 .. 2
        Tee1 ← TeeF(FlocModTeeA_Origin + [
            0 m;
            i*(W_FlocChannel - 2*S_Fitting - outerdiameter(ND_FlocMod))/2 + W_FlocChannel + T_PlantWall;
            0 m
        ], [90; 0; 90]*deg, ND_FlocMod, PS_Modules)
        Tee2 ← TeeF(FlocModTeeA_Origin + [
            -L_FlocModConnectorMidA;
            i*(W_FlocChannel - 2*S_Fitting - outerdiameter(ND_FlocMod))/2 + W_FlocChannel + T_PlantWall;
            0 m
        ], [-90; 0; 90]*deg, ND_FlocMod, PS_Modules)
        local ← stack(local, Tee1, ArrayFlocModYB, Tee2, ArrayFlocModYB)
    return local
FlocElbowsHighB :=
    local ← view("t")
    for i ∈ 0 .. 2
        Elbow1 ← ElbowF(FlocModElbowHighA_Origin + [
            0 m;
            i*(W_FlocChannel - 2*S_Fitting - outerdiameter(ND_FlocMod))/2 + W_FlocChannel + T_PlantWall;
            0 m
        ], [-90; 0; -90]*deg, ND_FlocMod, PS_Modules)
        Elbow2 ← ElbowF(FlocModElbowHighA_Origin + [
            -L_FlocModConnectorHighA;
            i*(W_FlocChannel - 2*S_Fitting - outerdiameter(ND_FlocMod))/2 + W_FlocChannel + T_PlantWall;
            0 m
        ], [90; 0; 90]*deg, ND_FlocMod, PS_Modules)
        local ← stack(local, Elbow1, ArrayFlocModYB, Elbow2, ArrayFlocModYB)
    return local
FlocFittingBScript :=
    stack(FlocElbowsLowB, FlocTeesB, FlocElbowsHighB, MirrorFlocModX) if N_FlocChannels > 2
    view("t") otherwise
# Floc fittings C (first channel)
FlocElbowsLowC :=
    local ← view("t")
    for i ∈ 0 .. 2
        Elbow1 ← ElbowF(FlocModElbowLowC_Origin + [0 m; i*(W_FlocChannel - 2*S_Fitting - outerdiameter(ND_FlocMod))/2; 0 m], [-90; 0; 90]*deg, ND_FlocMod, PS_Modules)
        Elbow2 ← ElbowF(FlocModElbowLowC_Origin + [-L_FlocModConnectorLowC; i*(W_FlocChannel - 2*S_Fitting - outerdiameter(ND_FlocMod))/2; 0 m], [90; 0; -90]*deg, ND_FlocMod, PS_Modules)
        local ← stack(local, Elbow1, Elbow2)
    return local
FlocTeesC :=
    local ← view("t")
    for i ∈ 0 .. 2
        Tee1 ← TeeF(FlocModTeeC_Origin + [0 m; i*(W_FlocChannel - 2*S_Fitting - outerdiameter(ND_FlocMod))/2; 0 m], [90; 0; 90]*deg, ND_FlocMod, PS_Modules)
        Tee2 ← TeeF(FlocModTeeC_Origin + [-L_FlocModConnectorMidC; i*(W_FlocChannel - 2*S_Fitting - outerdiameter(ND_FlocMod))/2; 0 m], [-90; 0; 90]*deg, ND_FlocMod, PS_Modules)
        local ← stack(local, Tee1, Tee2)
    return local
FlocElbowsHighC :=
    local ← view("t")
    for i ∈ 0 .. 2
        Elbow1 ← ElbowF(FlocModElbowHighC_Origin + [0 m; i*(W_FlocChannel - 2*S_Fitting - outerdiameter(ND_FlocMod))/2; 0 m], [-90; 0; -90]*deg, ND_FlocMod, PS_Modules)
        Elbow2 ← ElbowF(FlocModElbowHighC_Origin + [-L_FlocModConnectorHighC; i*(W_FlocChannel - 2*S_Fitting - outerdiameter(ND_FlocMod))/2; 0 m], [90; 0; 90]*deg, ND_FlocMod, PS_Modules)
        local ← stack(local, Elbow1, Elbow2)
    return local
FlocFittingCScript := stack(FlocElbowsLowC, FlocTeesC, FlocElbowsHighC)
# Floc fittings A (even-numbered channels)
FlocElbowsLowA :=
    local ← view("t")
    for i ∈ 0 .. 2
        Elbow1 ← ElbowF(FlocModElbowLowA_Origin + [0 m; i*(W_FlocChannel - 2*S_Fitting - outerdiameter(ND_FlocMod))/2; 0 m], [-90; 0; 90]*deg, ND_FlocMod, PS_Modules)
        Elbow2 ← ElbowF(FlocModElbowLowA_Origin + [-L_FlocModConnectorLowA; i*(W_FlocChannel - 2*S_Fitting - outerdiameter(ND_FlocMod))/2; 0 m], [90; 0; -90]*deg, ND_FlocMod, PS_Modules)
        local ← stack(local, Elbow1, ArrayFlocModYA, Elbow2, ArrayFlocModYA)
    return local
FlocTeesA :=
    local ← view("t")
    for i ∈ 0 .. 2
        Tee1 ← TeeF(FlocModTeeA_Origin + [0 m; i*(W_FlocChannel - 2*S_Fitting - outerdiameter(ND_FlocMod))/2; 0 m], [90; 0; 90]*deg, ND_FlocMod, PS_Modules)
        Tee2 ← TeeF(FlocModTeeA_Origin + [-L_FlocModConnectorMidA; i*(W_FlocChannel - 2*S_Fitting - outerdiameter(ND_FlocMod))/2; 0 m], [-90; 0; 90]*deg, ND_FlocMod, PS_Modules)
        local ← stack(local, Tee1, ArrayFlocModYA, Tee2, ArrayFlocModYA)
    return local
FlocElbowsHighA :=
    local ← view("t")
    for i ∈ 0 .. 2
        Elbow1 ← ElbowF(FlocModElbowHighA_Origin + [0 m; i*(W_FlocChannel - 2*S_Fitting - outerdiameter(ND_FlocMod))/2; 0 m], [-90; 0; -90]*deg, ND_FlocMod, PS_Modules)
        Elbow2 ← ElbowF(FlocModElbowHighA_Origin + [-L_FlocModConnectorHighA; i*(W_FlocChannel - 2*S_Fitting - outerdiameter(ND_FlocMod))/2; 0 m], [90; 0; 90]*deg, ND_FlocMod, PS_Modules)
        local ← stack(local, Elbow1, ArrayFlocModYA, Elbow2, ArrayFlocModYA)
    return local
FlocFittingAScript := stack(FlocElbowsLowA, FlocTeesA, FlocElbowsHighA)
FlocModFittingScript := stack(FlocModFittingLayer, FlocFittingBScript, FlocFittingCScript, FlocFittingAScript, FlocModFittingFrz)
# Rapid mix
# Coupling
FlocCoupling_Origin := Floc_Origin + [
    -L_Floc + S_Fitting + ConRadius(ND_RMPipe);
    N_FlocChannels*(W_FlocChannel + T_PlantWall) - T_PlantWall + SocketDepth(ND_RMPipe) - L_FlocCouplingExt;
    S_Fitting + ConRadius(ND_RMPipe)
]
FlocRMCoupling := CouplingSUBF(FlocCoupling_Origin, [270; 0]*deg, ND_RMPipe, PS_Default, ["FlocTankCon"])
FlocCouplingScript := stack(FlocRMFittingLayer, FlocRMCoupling, FlocRMFittingFrz)
# Orifice plate
RMOrificePlate := CylinderF(FlocCoupling_Origin + [0 m; -SocketDepth(ND_RMPipe) + L_FlocCouplingExt; 0 m], outerradius(ND_RMPipe), T_Acrylic, [270; 0]*deg)
RMOrifice := CylinderF(FlocCoupling_Origin + [0 m; -SocketDepth(ND_RMPipe) + L_FlocCouplingExt - zc; 0 m], D_RMOrifice/2, T_Acrylic + 2*zc, [270; 0]*deg)
RMOrificePlateScript := stack(FlocRMOrificeLayer, RMOrificePlate, FlocRMOrificeFrz, RMOrifice, GroupDelete, SubtractFromFlocRMOrifice)
# Orifice plate restrainer
FlocRMRestrainer := PipeSUBF(FlocCoupling_Origin + [
    0 m;
    -SocketDepth(ND_RMPipe) + L_FlocCouplingExt - outerradius(ND_FlocRMRestrainer);
    -ConRadius(ND_RMPipe) - zc
], 2*ConRadius(ND_RMPipe) + 2*zc, [0; 90]*deg, ND_FlocRMRestrainer, PS_Modules, ["FlocRMFittingPlu"])
FlocRMRestrainerScript := stack(FlocRMOrificeRestrainerLayer, FlocRMRestrainer, FlocRMOrificeRestrainerFrz)
FlocRMScript := stack(FlocCouplingScript, RMOrificePlateScript, FlocRMRestrainerScript)
# Channel drains
# Drain fittings
FlocDrainCoupling_Origin := Floc_Origin + [
    -L_Floc + S_Fitting + ConRadius(ND_FlocDrain);
    3*W_FlocChannel/4 - (S_Fitting + outerradius(ND_FlocMod))/2;
    -SocketDepth(ND_FlocDrain)
]
FlocDrainElbow_Origin := Floc_Origin + [
    -L_Floc + S_Fitting + ConRadius(ND_FlocDrain) - ElbowRadius(ND_FlocDrain);
    3*W_FlocChannel/4 - (S_Fitting + outerradius(ND_FlocMod))/2;
    min(-T_FlocSlab - ConRadius(ND_FlocDrain), -CouplingLength(ND_FlocDrain) - SocketDepth(ND_FlocDrain) - ElbowRadius(ND_FlocDrain))
]
FlocDrainElbows :=
    local ← view("t")
    for i ∈ 0 .. N_FlocChannels - 1
        Elbow ← ElbowSUBF(FlocDrainElbow_Origin + [0 m; (W_FlocChannel + T_PlantWall)*i; 0 m], [-90; 0; 90]*deg, ND_FlocDrain, PS_Default, ["FlocTankCon"])
        local ← stack(local, Elbow)
    return local
FlocDrainCouplings :=
    local ← view("t")
    for i ∈ 0 .. N_FlocChannels - 1
        Coupling ← CouplingSUBF(FlocDrainCoupling_Origin + [0 m; (W_FlocChannel + T_PlantWall)*i; 0 m], [0; -90]*deg, ND_FlocDrain, PS_Default, ["FlocTankCon"])
        local ← stack(local, Coupling)
    return local
FlocDrainFittingScript := stack(FlocDrainFittingLayer, FlocDrainElbows, FlocDrainCouplings, FlocDrainFittingFrz)
# Drain pipes
FlocDrainHorizPipes :=
    local ← view("t")
    for i ∈ 0 .. N_FlocChannels - 1
        Pipe ← PipeF(FlocDrainElbow_Origin + [0 m; (W_FlocChannel + T_PlantWall)*i; 0 m], T_PlantWall + S_Fitting + ConRadius(ND_FlocDrain) - ElbowRadius(ND_FlocDrain), [0; 0]*deg, ND_FlocDrain, PS_Default)
        local ← stack(local, Pipe)
    return local
FlocDrainVertPipes :=
    local ← view("t")
    for i ∈ 0 .. N_FlocChannels - 1
        Pipe ← PipeSUBF(FlocDrainCoupling_Origin + [0 m; (W_FlocChannel + T_PlantWall)*i; -CouplingLength(ND_FlocDrain) + 2*SocketDepth(ND_FlocDrain)], FlocDrainCoupling_Origin[2] - FlocDrainElbow_Origin[2] - ElbowRadius(ND_FlocDrain) - CouplingLength(ND_FlocDrain) + 2*SocketDepth(ND_FlocDrain), [0; -90]*deg, ND_FlocDrain, PS_Default, ["FlocTankCon"])
        local ← stack(local, Pipe)
    return local
FlocDrainPipeScript := stack(FlocDrainPipeLayer, FlocDrainHorizPipes, FlocDrainVertPipes, FlocDrainPipeFrz)
# Drain stubs
FlocDrainStub := PipeF(FlocDrainCoupling_Origin, H_Floc + SocketDepth(ND_FlocDrain) + L_FlocDrainStubExt, [0; 90]*deg, ND_FlocDrain, PS_Default)
ArrayFlocDrainStub := ArrayLast(N_FlocChannels, 1, W_FlocChannel + T_PlantWall)
FlocDrainStubScript := stack(FlocDrainRemovableLayer, FlocDrainStub, ArrayFlocDrainStub, FlocDrainRemovableFrz)
FlocDrainScript := stack(FlocDrainFittingScript, FlocDrainPipeScript, FlocDrainStubScript)
W_TrainWalkway := 1.5 m
ThawFloc := ThawMultiple(["Floc*Con"])
MirrorFlocTank := Mirror3dAll("yz", [Floc_Origin[0] - L_Floc - W_PlantDC/2 - T_PlantWall; 0 m], "n")
FreezeFloc := FreezeMultiple(["Floc*Con"])
AC_FlocTank := stack(FlocMasonryScript, FlocModConnectorScript, FlocModSpacerScript, FlocBaffleScript, FlocModFittingScript, FlocRMScript, FlocDrainScript)
