Z_FlocLowBaffleTop
Z_FlocBottom
Z_FlocTop
# Flocculator AutoCAD
H_FlocBaffleLow
H_FlocBaffleHigh
# Layers
FlocConLayer := layer_new("FlocTankCon", grey)
SelectFlocCon := SelectLayer("FlocTankCon")
FlocConFrz := FreezeLayer("FlocTankCon")
SubtractFromFlocCon := SubtractF(["FlocTankCon"], "DeleteMe")
FlocDrainPipeLayer := layer_new("FlocDrainPipePlu", blue)
SelectFlocDrainPipe := SelectLayer("FlocDrainPipePlu")
FlocDrainPipeFrz := FreezeLayer("FlocDrainPipePlu")
FlocDrainFittingLayer := layer_new("FlocDrainFittingPlu", green)
SelectFlocDrainFitting := SelectLayer("FlocDrainFittingPlu")
FlocDrainFittingFrz := FreezeLayer("FlocDrainFittingPlu")
FlocDrainRemovableLayer := layer_new("FlocDrainRemovablePlu", red)
SelectFlocDrainRemovable := SelectLayer("FlocDrainRemovablePlu")
FlocDrainRemovableFrz := FreezeLayer("FlocDrainRemovablePlu")
FlocBaffleLayer := layer_new("FlocModBaffles", ltpurple)
SelectFlocBaffle := SelectLayer("FlocModBaffles")
FlocBaffleFrz := FreezeLayer("FlocModBaffles")
FlocModPipeLayer := layer_new("FlocModPipePlu", blue)
SelectFlocModPipe := SelectLayer("FlocModPipePlu")
FlocModPipeFrz := FreezeLayer("FlocModPipePlu")
FlocModSpacerLayer := layer_new("FlocModSpacerPlu", blue3)
SelectFlocModSpacer := SelectLayer("FlocModSpacerPlu")
FlocModSpacerFrz := FreezeLayer("FlocModSpacerPlu")
FlocModFittingLayer := layer_new("FlocModFittingPlu", green)
SelectFlocModFitting := SelectLayer("FlocModFittingPlu")
FlocModFittingFrz := FreezeLayer("FlocModFittingPlu")
FlocObsDownLayer := layer_new("FlocObsDownPipe", blue2)
SelectFlocObsDown := SelectLayer("FlocObsDownPipe")
FlocObsDownFrz := FreezeLayer("FlocObsDownPipe")
SubtractFromFlocObsDown := SubtractF(["FlocObsDownPipe"], "DeleteMe")
FlocObsUpLayer := layer_new("FlocObsUpPipe", blue2)
SelectFlocObsUp := SelectLayer("FlocObsUpPipe")
FlocObsUpFrz := FreezeLayer("FlocObsUpPipe")
SubtractFromFlocObsUp := SubtractF(["FlocObsUpPipe"], "DeleteMe")
# Origin Points
FlocCoupling_Origin := [
    Floc_Origin[0] + ConRadius(ND_RMPipe) + S_Fitting - L_Sed;
    Floc_Origin[1] + N_FlocChannels*W_FlocChannel + T_FlocChannelWall*(N_FlocChannels - 1) + SocketDepth(ND_RMPipe) - L_FlocCouplingExt;
    Floc_Origin[2] + outerradius(ND_RMPipe) + S_Fitting
]
FlocPort_Origin :=
    for i ∈ 0 .. (N_FlocChannels - 2)
        if mod(i, 2) == 1
            FlocPort_Origin[0, i] ← [
                Floc_Origin[0] - TotalFloc_Dim[0];
                Floc_Origin[1] + (W_FlocChannel*(1 + i)) + T_FlocChannelWall*i - zc;
                Floc_Origin[2] + H_FlocPort[i]
            ]
        otherwise
            FlocPort_Origin[0, i] ← [
                Floc_Origin[0] - W_FlocPort[N_FlocChannels - 2 - i];
                Floc_Origin[1] + (W_FlocChannel*(1 + i)) + T_FlocChannelWall*i - zc;
                Floc_Origin[2] + H_FlocPort[i]
            ]
    return FlocPort_Origin
# The flocport origins were set to start at the top height of the ports themselves (added to the origin otherwise it disappears).  This changes the flocports to be at the bottom of the channel dividing walls instead of at the top (more structurally sound).
ChannelOpening_Origin := [Floc_Origin[0] - L_Sed; Floc_Origin[1] - T_PlantWall; Z_SedChannelBottom]
# The Channel Opening was changed in the z-direction so that the bottom opening aligned with the bottom of the tank (for the same reason as the flocports).
# Flocculator Masonry
# Origins
Floc_Origin := [Plant_Origin[0]; Plant_Origin[1] + N_SedTanks*(W_Sed + T_PlantWall); Z_FlocBottom]
Floc_Dim := [L_Sed; N_FlocChannels*(W_FlocChannel + T_PlantWall) - T_PlantWall; H_Floc]
FlocChannelWall_Origin := [Floc_Origin[0] - L_Sed - T_PlantWall; Floc_Origin[1] + W_FlocChannel; Floc_Origin[2]]
FlocChannelWall_Dim := [L_Sed + 2*T_PlantWall; T_PlantWall; H_Floc]
FlocPort1_Origin := Floc_Origin + [-W_FlocPort; W_FlocChannel; 0 m]
FlocPort2_Origin := Floc_Origin + [-L_Sed; 2*W_FlocChannel + T_PlantWall; 0 m]
FlocPort_Dim := [W_FlocPort; T_PlantWall; H_FlocPort]
SedChannelOpening_Origin := Floc_Origin + [-L_Sed; 0 m; H_Floc]
SedChannelOpening_Dim := [W_SedInletChannelPreWeir; -T_PlantWall; Z_SedChannelBottom - Z_FlocTop]
FlocSlabCut_Origin := Floc_Origin + [T_PlantWall; -T_PlantWall; -T_PlantWall]
FlocSlabCut_Dim := [
    -2*T_PlantWall - L_Sed;
    T_PlantWall + N_FlocChannels*(W_FlocChannel + T_PlantWall);
    T_PlantWall - T_FlocSlab
]
# Masonry
FlocTank := Tank(Floc_Origin, Floc_Dim, T_PlantWall)
FlocChannelWall := BoxF(Wall_Origin, Wall_Origin + Wall_Dim, [0; 0; 0]*deg)
ArrayFlocWall := ArrayLast(N_FlocChannels - 1, 1, W_FlocChannel + T_PlantWall)
FlocTankScript := stack(FlocTankLayer, FlocTank, FlocChannelWall, ArrayFlocWall, Union_All, FlocTankFrz)
# Masonry cuts
FlocPort1 := BoxF(FlocPort1_Origin, FlocPort1_Origin + FlocPort_Dim, [0; 0; 0]*deg)
ArrayFlocPort1 := ArrayLast(N_FlocChannels/2, 1, 2*(W_FlocChannel + T_PlantWall))
FlocPort2 := BoxF(FlocPort2_Origin, FlocPort2_Origin + FlocPort_Dim, [0; 0; 0]*deg)
ArrayFlocPort2 := ArrayLast(N_FlocChannels/2 - 1, 1, 2*(W_FlocChannel + T_PlantWall))
SedChannelOpening := BoxF(SedChannelOpening_Origin, SedChannelOpening_Origin + SedChannelOpening_Dim, [0; 0; 0]*deg)
FlocSlabCut := BoxF(FlocSlabCut_Origin, FlocSlabCut_Origin + FlocSlabCut_Dim, [0; 0; 0]*deg)
FlocMasonryCutScript :=
    stack(FlocPort1, ArrayFlocPort1, FlocPort2, ArrayFlocPort2, SedChannelOpening, FlocSlabCut, GroupDelete, SubtractFromFlocTank) if N_FlocChannels > 2
    stack(FlocPort1, ArrayFlocPort1, SedChannelOpening, FlocSlabCut, GroupDelete, SubtractFromFlocTank) otherwise
FlocMasonryScript := stack(FlocTankScript, FlocMasonryCutScript)
FlocRMCut := CylinderF(FlocCoupling_Origin, outerradius(ND_RMPipe), T_PlantWall, [270; 0]*deg)
RMRodLayer := layer_new("FlocRMRods", grey)
RMRods := CylinderF([
    Floc_Origin[0] - L_Sed + S_RMGate + OD_RMRod/2;
    Floc_Origin[1] + TotalFloc_Dim[1] + 5 cm;
    -zc + Floc_Origin[2]
], OD_RMRod/2, H_RMChannel + 2*zc, [0; 0]*deg)
RotateRod := Rotate3DLast([
    Floc_Origin[0] - L_Sed + S_RMGate + OD_RMRod/2;
    Floc_Origin[1] + TotalFloc_Dim[1] + 5 cm;
    -zc + Floc_Origin[2]
], "y", 90 deg)
ArrayRods := ArrayLast(1, N_RMRods, S_RMGate + OD_RMRod)
# Baffles
# Baffle origins and dimensions
FlocBaffleLow_Origin(N) := Floc_Origin + [-S_FlocBaffle; N*(W_FlocChannel + T_PlantWall); 0 m]
FlocBaffleLow_Dim := [-T_SedPlate; W_FlocChannel; H_FlocBaffleLow]
FlocBaffleHigh_Origin(N) := Floc_Origin + [-2*S_FlocBaffle - T_SedPlate; N*(W_FlocChannel + T_PlantWall); Pi_FlocBaffle*S_FlocBaffle]
FlocBaffleHigh_Dim := [-T_SedPlate; W_FlocChannel; H_FlocBaffleHigh]
# Draw and array baffles
FlocBafflesLow :=
    Local ← view("t")
    for i ∈ 0 .. N_FlocChannels - 1
        Baffle ← BoxF(FlocBaffleLow_Origin(i), FlocBaffleLow_Origin(i) + FlocBaffleLow_Dim, [0; 0; 0]*deg)
        Array ←
            ArrayLast(1, (N_FlocLastChannelBaffles + 1)/2, -2*B_FlocBaffle) if i == 0
            ArrayLast(1, (N_FlocFirstChannelBaffles + 1)/2, -2*B_FlocBaffle) if i == (N_FlocChannels - 1)
            ArrayLast(1, (N_FlocChannelBaffles + 1)/2, -2*B_FlocBaffle) otherwise
        Local ← stack(Local, Baffle, Array)
    return Local
FlocBafflesHigh :=
    Local ← view("t")
    for i ∈ 0 .. N_FlocChannels - 1
        Baffle ← BoxF(FlocBaffleHigh_Origin(i), FlocBaffleHigh_Origin(i) + FlocBaffleHigh_Dim, [0; 0; 0]*deg)
        Array ←
            ArrayLast(1, (N_FlocLastChannelBaffles - 1)/2, -2*B_FlocBaffle) if i == 0
            ArrayLast(1, (N_FlocFirstChannelBaffles - 1)/2, -2*B_FlocBaffle) if i == (N_FlocChannels - 1)
            ArrayLast(1, (N_FlocChannelBaffles - 1)/2, -2*B_FlocBaffle) otherwise
        Local ← stack(Local, Baffle, Array)
    return Local
FlocBaffleScript := stack(FlocBaffleLayer, FlocBafflesLow, FlocBafflesHigh, FlocBaffleFrz)
S_FlocModEdgeToLastPipe := □  # error: This placeholder is empty.
FlocModConnectorA_Origin := FlocBaffleLow_Origin + [
    SocketDepth(ND_FlocMod) + max(0 m, ShortTeeLength(ND_FlocMod) - ElbowRadius(ND_FlocMod));
    S_Fitting;
    Pi_FlocBaffle*S_FlocBaffle/2
]
L_FlocModConnectorA := L_Sed - S_FlocBaffle - ConRadius(ND_FlocMod) - ElbowRadius(ND_FlocMod) + SocketDepth(ND_FlocMod)
FlocModConnectorB_Origin := FlocBaffleLow_Origin + [
    SocketDepth(ND_FlocMod) + max(0 m, ElbowRadius(ND_FlocMod) - ShortTeeLength(ND_FlocMod));
    S_Fitting + outerradius(ND_FlocMod);
    (Pi_FlocBaffle*S_FlocBaffle + FlocBaffleLow_Dim[2])/2
]
L_FlocModConnectorB := L_Sed - S_FlocBaffle - ConRadius(ND_FlocMod) - ShortTeeLength(ND_FlocMod) + SocketDepth(ND_FlocMod)
FlocModConnectorC_Origin := [FlocModConnectorA_Origin[0]; FlocModConnectorA_Origin[1]; Z]
L_FlocModConnectorC := L_FlocModConnectorA
FlocModVertPipeA_Origin := FlocModConnectorA_Origin + [ElbowRadius(ND_FlocMod); 0 m; ElbowRadius(ND_FlocMod)]
L_FlocModVertPipeA := S_FlocBaffle*Pi_FlocBaffle/2 + S_FlocObstacle - TeeLength(ND_FlocMod)/2 - ElbowRadius(ND_FlocMod)
FlocModVertPipeB_Origin := FlocModConnectorB_Origin + [ShortTeeLength(ND_FlocMod); 0 m; TeeLength(ND_FlocMod)/2]
L_FlocModVertPipeB := S_FlocObstacle - TeeLength(ND_FlocMod)
FlocModVertPipeC_Origin := FlocModConnectorC_Origin + [ElbowRadius(ND_FlocMod); 0 m; -ElbowRadius(ND_FlocMod)]
L_FlocModVertPipeC := H_FlocBaffleHigh - H_FlocBaffleOverlap - S_FlocModEdgeToLastPipe + S_FlocObstacle - ElbowRadius(ND_FlocMod) - TeeLength(ND_FlocMod)/2
FlocModConnectorsA :=
    local ← SelectFlocModPipe
    for i ∈ 0 .. 2
        Pipe ← PipeSUBF(FlocModConnectorA_Origin + [0 m; i*(W_Floc - 2*S_Fitting)/2; 0 m], L_FlocModConnectorA, [0; 0]*deg, ND_FlocMod, PS_Modules, ["FlocModBaffles"])
        local ← stack(local, Pipe)
    local ← stack(local, FlocModPipeFrz)
FlocModConnectorsB :=
    local ← SelectFlocModPipe
    for j ∈ 0 .. N_FlocObstaclesPerSpace - 1
        for i ∈ 0 .. 2
            Pipe ← PipeSUBF(FlocModConnectorB_Origin + [0 m; i*(W_Floc - 2*S_Fitting)/2; j*S_FlocObstacle], L_FlocModConnectorB, [0; 0]*deg, ND_FlocMod, PS_Modules, ["FlocModBaffles"])
            local ← stack(local, Pipe)
    local ← stack(local, FlocModPipeFrz)
FlocModConnectorsC :=
    local ← SelectFlocModPipe
    for i ∈ 0 .. 2
        Pipe ← PipeSUBF(FlocModConnectorC_Origin + [0 m; i*(W_Floc - 2*S_Fitting)/2; 0 m], L_FlocModConnectorC, [0; 0]*deg, ND_FlocMod, PS_Modules, ["FlocModBaffles"])
        local ← stack(local, Pipe)
    local ← stack(local, FlocModPipeFrz)
ArrayFlocModY := ArrayLast(3, 1, (W_Floc - 2*S_Fitting)/2)
MirrorFlocModX := MirrorAll([FlocModConnectorA_Origin[0] - L_FlocModConnectorA/2; FlocModConnectorA_Origin[1]], [FlocModConnectorA_Origin[0] - L_FlocModConnectorA/2; FlocModConnectorA_Origin[1] + zc], "n")
FlocModVertPipeA := PipeF(FlocModVertPipeA_Origin, L_FlocModVertPipeA, [0; 90]*deg, ND_FlocMod, PS_Modules)
FlocModVertPipeB :=
    local ← view("t")
    for i ∈ 0 .. N_FlocObstaclesPerSpace - 2
        Pipe ← PipeF(FlocModVertPipeB_Origin + [0 m; 0 m; i*S_FlocObstacle], L_FlocModVertPipeB, [0; 90]*deg, ND_FlocMod, PS_Modules)
        local ← stack(local, Pipe, ArrayFlocModY)
    return local
FlocModVertPipeC := PipeF(FlocModVertPipeC_Origin, L_FlocModVertPipeC, [0; -90]*deg, ND_FlocMod, PS_Modules)
FlocModConnectorScript := stack(FlocModPipeLayer, FlocModVertPipeA, ArrayFlocModY, FlocModVertPipeB, FlocModVertPipeC, ArrayFlocModY, MirrorFlocModX, FlocModPipeFrz, FlocModConnectorsA, FlocModConnectorsB, FlocModConnectorsC)
FlocModElbow1_Origin := FlocModConnectorA_Origin
FlocModElbow2_Origin := FlocModConnectorC_Origin
FlocModTee_Origin := FlocModConnectorB_Origin
FlocModElbow1 := ElbowF(FlocModElbow1_Origin, [-90; 0; 90]*deg, ND_FlocMod, PS_Modules)
FlocModElbow2 := ElbowF(FlocModElbow2_Origin, [-90; 0; -90]*deg, ND_FlocMod, PS_Modules)
FlocModTees :=
    local ← view("t")
    for i ∈ 0 .. N_FlocObstaclesPerSpace - 1
        Tee ← TeeF(FlocModTee_Origin + [0 m; 0 m; i*S_FlocObstacle], [90; 0; 90]*deg, ND_FlocMod, PS_Modules)
        local ← stack(local, Tee, ArrayFlocModY)
    return local
FlocModFittingScript := stack(FlocModFittingLayer, FlocModElbow1, ArrayFlocModY, FlocModElbow2, ArrayFlocModY, FlocModTees, MirrorFlocModX, FlocModFittingFrz)
# Vertical Baffles
FlocBaffleLayerV := layer_new("FlocModBaffles", ltpurple)
DrawLowerBaffleV := BoxF([Floc_Origin[0] - L_Sed; -L_Slot; Floc_Origin[2]] + [X_FlocBaffles[0, 0]; Y_FlocBaffles[0, 0]; Z_FlocBaffles[0, 0]], [Floc_Origin[0] - L_Sed; -L_Slot; Floc_Origin[2]] + [X_FlocBaffles[0, 0]; Y_FlocBaffles[0, 0]; Z_FlocBaffles[0, 0]] + [T_FlocBaffle; W_FlocChannel + 2*L_Slot; L_FlocBaffles[0, 0]], [0; 0; 0]*deg)
ArrayLowerBaffleV := ArrayLast(1, ceil(N_FlocChannelBaffles[0]/2), 2*B_FlocBaffle[0])
# Aligned FlocModuleBaffle spacing of last floc channel to the FlocModuleBaffle spacings of the other channels.
DrawUpperBaffleV := BoxF([Floc_Origin[0] - L_Sed; -L_Slot; Floc_Origin[2]] + [X_FlocBaffles[1, 0]; Y_FlocBaffles[0, 0]; Z_FlocBaffles[1, 0]], [Floc_Origin[0] - L_Sed; -L_Slot; Floc_Origin[2]] + [X_FlocBaffles[1, 0]; Y_FlocBaffles[0, 0]; Z_FlocBaffles[1, 0]] + [T_FlocBaffle; W_FlocChannel + 2*L_Slot; L_FlocBaffles[1, 0]], [0; 0; 0]*deg)
ArrayUpperBaffleV := ArrayLast(1, {
    ceil(N_FlocChannelBaffles[0]/2) if Q_Plant ≤ Q_PlantMaxLF
    floor(N_FlocChannelBaffles[0]/2) otherwise
}, 2*B_FlocBaffle[0])
ArrayBafflesChannelV := array_all(N_FlocChannels - 1, 1, -W_FlocChannel - T_FlocChannelWall)
DrawLastLowerBaffleV := BoxF([Floc_Origin[0] - L_Sed; -L_Slot; Floc_Origin[2]] + [
    X_FlocBaffles[N_FlocChannelBaffles[N_FlocChannels - 1] - 1, N_FlocChannels - 1];
    Y_FlocBaffles[0, N_FlocChannels - 1];
    Z_FlocBaffles[1, N_FlocChannels - 1]
], [Floc_Origin[0] - L_Sed; -L_Slot; Floc_Origin[2]] + [
    X_FlocBaffles[N_FlocChannelBaffles[N_FlocChannels - 1] - 1, N_FlocChannels - 1];
    Y_FlocBaffles[0, N_FlocChannels - 1];
    Z_FlocBaffles[1, N_FlocChannels - 1]
] + [-T_FlocBaffle; W_FlocChannel + 2*L_Slot; L_FlocBaffles[1, N_FlocChannels - 1]], [0; 0; 0]*deg)
ArrayLastLowerBaffleV := ArrayLast(1, floor(N_FlocChannelBaffles[last(N_FlocChannelBaffles)]/2), -(2*B_FlocBaffle[0]))
DrawLastUpperBaffleV := BoxF([Floc_Origin[0] - L_Sed; -L_Slot; Floc_Origin[2]] + [
    X_FlocBaffles[N_FlocChannelBaffles[N_FlocChannels - 1] - 2, N_FlocChannels - 1];
    Y_FlocBaffles[0, N_FlocChannels - 1];
    Z_FlocBaffles[0, N_FlocChannels - 1]
], [Floc_Origin[0] - L_Sed; -L_Slot; Floc_Origin[2]] + [
    X_FlocBaffles[N_FlocChannelBaffles[N_FlocChannels - 1] - 2, N_FlocChannels - 1];
    Y_FlocBaffles[0, N_FlocChannels - 1];
    Z_FlocBaffles[0, N_FlocChannels - 1]
] + [-T_FlocBaffle; W_FlocChannel + 2*L_Slot; L_FlocBaffles[0, N_FlocChannels - 1]], [0; 0; 0]*deg)
ArrayLastUpperBaffleV := ArrayLast(1, floor(N_FlocChannelBaffles[last(N_FlocChannelBaffles)]/2), -(2*B_FlocBaffle[0]))
FreezeBafflesV := FreezeLayer("FlocModBaffles")
DrawBafflePort1V := BoxF(BafflePort1V_Origin, BafflePort1V_Origin + Port_Dim, [0; 0; 0]*deg)
DrawBafflePort1VLast := BoxF(BafflePort1VLast_Origin, BafflePort1VLast_Origin + Port_Dim, [0; 0; 0]*deg)
DrawBafflePort2V := BoxF(BafflePort2V_Origin, BafflePort2V_Origin + Port_Dim, [0; 0; 0]*deg)
DrawBafflePort2VLast := BoxF(BafflePort2VLast_Origin, BafflePort2VLast_Origin + Port_Dim, [0; 0; 0]*deg)
ArrayPort1V := ArrayMultiple([BafflePort1V_Origin], N_FlocChannels - 1, ceil(N_FlocChannelBaffles[0]/4), -W_FlocChannel - T_FlocChannelWall, 4*B_FlocBaffle[0])
ArrayPort2V := ArrayMultiple([BafflePort2V_Origin], N_FlocChannels - 1, ceil((N_FlocChannelBaffles[0] - 2)/4), -W_FlocChannel - T_FlocChannelWall, 4*B_FlocBaffle[0])
ArrayPort1VLast := ArrayMultiple([BafflePort1VLast_Origin], 1, ceil(N_FlocChannelBaffles[N_FlocChannels - 1]/4), -W_FlocChannel - T_FlocChannelWall, -(4*B_FlocBaffle[N_FlocChannels - 1]))
ArrayPort2VLast := ArrayMultiple([BafflePort2VLast_Origin], 1, ceil((N_FlocChannelBaffles[N_FlocChannels - 1] - 3)/4), -W_FlocChannel - T_FlocChannelWall, -(4*B_FlocBaffle[N_FlocChannels - 1]))
FlocCouplingBaffleCut := CylinderF(FlocCoupling_Origin, ConRadius(ND_RMPipe), SocketDepth(ND_RMPipe), [90; 0]*deg)
GroupBafflesV := GroupAll("DeleteMe")
SubtractBafflePortsV := SubtractF(["FlocModBaffles"], "DeleteMe")
MirrorBafflesV := MirrorAll([Floc_Origin[0]; Floc_Origin[1]] - [L_Sed/2; 0 m], [Floc_Origin[0]; Floc_Origin[1]] - [L_Sed/2; zc], "y")
FlocTankBaffleScriptV := stack(FlocBaffleLayerV, DrawLowerBaffleV, ArrayLowerBaffleV, DrawUpperBaffleV, ArrayUpperBaffleV, ArrayBafflesChannelV, DrawLastLowerBaffleV, ArrayLastLowerBaffleV, DrawLastUpperBaffleV, ArrayLastUpperBaffleV, FreezeBafflesV, DrawBafflePort1V, DrawBafflePort2V, DrawBafflePort1VLast, DrawBafflePort2VLast, view("t"), ArrayPort1V, ArrayPort2V, ArrayPort1VLast, ArrayPort2VLast, FlocCouplingBaffleCut, GroupBafflesV, SubtractBafflePortsV)
# Module Piping for Beginning Channels (overlapping)
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# Modules labeled "1" are for the odd-numbered channels (1st, 3rd, etc) while "Mod2" are those facing the opposite direction in the even-numbered channels.
FlocMod1CapLayer := layer_new("FlocModCapPlu", red)
FlocModLargeCap := CapF(LargeCap_Origin, [0; 0]*deg, ND_FlocModulesLarge)
FlocModFittedCap := CapF(FittedCap_Origin, [180; 0]*deg, ND_FlocModulesMain)
FlocMod1CapFrz := FreezeLayer("FlocModCapPlu")
FlocMod1CouplingLayer := layer_new("FlocModCouplingPlu", green)
FlocModCoupling := CouplingF(ModuleCoupling_Origin, [0; 0]*deg, ND_FlocModulesMain, PS_Modules)
FlocMod1CouplingFrz := FreezeLayer("FlocModCouplingPlu")  # must freeze this layer to ensure it gets grouped
FlocMod1PipeLayer := layer_new("FlocModPipePlu", blue)
FlocModLongPipe := PipeF(LongPipe_Origin, L_FlocModuleLong[0], [0; 0]*deg, ND_FlocModulesMain, PS_Modules)
FlocModConnectorPipe := PipeF(ConnectorPipe_Origin, L_FlocModuleConnector[0], [0; 0]*deg, ND_FlocModulesMain, PS_Modules)
FlocMod1PipeFrz := FreezeLayer("FlocModPipePlu")
FlocMod1SpacerLayer := layer_new("FlocModSpacerPlu", blue)
FlocModSpacerPipe1 := PipeF(FittedCap_Origin + [S_FlocBaffle[0] - CapThickness(ND_FlocModulesMain); 0; 0], S_FlocBaffle[0] - CapHeight(ND_FlocModulesMain), [0; 0]*deg, ND_SpacerPipe, PS_Modules)
FlocModSpacerPipe2 := PipeF(FittedCap_Origin + [2*S_FlocBaffle[0] - CapThickness(ND_FlocModulesMain) + T_FlocBaffle; 0; 0], S_FlocBaffle[0], [0; 0]*deg, ND_SpacerPipe, PS_Modules)
ArrayFlocModSpacer := ArrayLast(1, N_FlocChannelBafflesLong[0] - 2, B_FlocBaffle[0])
FlocMod1SpacerFrz := FreezeLayer("FlocModSpacerPlu")
FlocMod1Spacer :=
    stack(FlocMod1SpacerLayer, FlocModSpacerPipe1, FlocMod1SpacerFrz) if N_FlocChannelBafflesLong[0] == 2
    stack(FlocMod1SpacerLayer, FlocModSpacerPipe1, FlocModSpacerPipe2, ArrayFlocModSpacer, FlocMod1SpacerFrz) otherwise
ThawFlocMod1Components := ThawMultiple(["FlocMod*Plu"])
ArrayFlocModX := array_all(1, N_FlocChannelModulesLong[0], B_FlocBaffle[0]*N_FlocChannelBafflesLong[0])
FrzFlocModComponents := FreezeMultiple(["FlocMod*"])
SelectFlocMod1Spacer := SelectLayer("FlocModSpacerPlu")
FlocModSpacerPipe1Short := PipeF([
    Plant_Origin[0] - X_FlocBaffles[(N_FlocChannelBafflesShort[0] - 2)*(N_FlocChannelBafflesShort[0] > 2), 0] - T_FlocBaffle;
    FittedCap_Origin[1];
    FittedCap_Origin[2]
], S_FlocBaffle[0] - CapHeight(ND_FlocModulesMain), [0; 0]*deg, ND_SpacerPipe, PS_Modules)
FlocModSpacerPipe2Short := PipeF([
    Plant_Origin[0] - X_FlocBaffles[(N_FlocChannelBafflesShort[0] - 3)*(N_FlocChannelBafflesShort[0] > 2), 0] - T_FlocBaffle;
    FittedCap_Origin[1];
    FittedCap_Origin[2]
], S_FlocBaffle[0], [0; 0]*deg, ND_SpacerPipe, PS_Modules)
ArrayFlocModSpacerShort := ArrayLast(1, N_FlocChannelBafflesShort[0] - 2, B_FlocBaffle[0])
FlocShortBaffleSpacers1 :=
    stack(SelectFlocMod1Spacer, FlocModSpacerPipe1Short, FlocModSpacerPipe2Short) if N_FlocChannelBafflesShort[0] == 3
    stack(SelectFlocMod1Spacer, FlocModSpacerPipe1Short, FlocModSpacerPipe2Short, ArrayFlocModSpacerShort) otherwise
# FlocModSpacerFrz
SelectFlocMod1Piping := SelectLayer("FlocModPipePlu")
FlocModShortPipe := PipeF([
    Floc_Origin[0] - X_FlocBaffles[0, 0] + SocketDepth(ND_FlocModulesMain);
    LargeCap_Origin[1];
    LargeCap_Origin[2]
], L_FlocModuleShort[0], [0; 0]*deg, ND_FlocModulesMain, PS_Modules)
FlocModEndPipe := PipeF([Floc_Origin[0]; LargeCap_Origin[1]; LargeCap_Origin[2]], {
    L_FlocModuleShort[0] if N_FlocChannelBafflesShort[0] < 2
    (X_FlocBaffles[0, 0] - CouplingLength(ND_FlocModulesMain) + SocketDepth(ND_FlocModulesMain)) otherwise
}, [0; 0]*deg, ND_FlocModulesMain, PS_Modules)
FlocModRightPipe :=
    FlocModEndPipe if N_FlocChannelBafflesShort[0] < 2
    stack(FlocModShortPipe, FlocModEndPipe) otherwise
# FlocModPipeFrz
SelectFlocMod1PipeCap := SelectLayer("FlocModCapPlu")
FlocModLastLargeCap := CapF([
    {
        (Floc_Origin[0] - X_FlocBaffles[N_FlocChannelBafflesShort[0] - 1, 0] - T_FlocBaffle - (CapDiameter(ND_FlocModulesLarge)/2 - outerradius(ND_FlocModulesLarge))) if N_FlocChannelBafflesShort[0] ≥ 1
        (Floc_Origin[0] - X_FlocBaffles[0, 0] - T_FlocBaffle - (CapDiameter(ND_FlocModulesLarge)/2 - outerradius(ND_FlocModulesLarge))) otherwise
    };
    LargeCap_Origin[1];
    LargeCap_Origin[2]
], [0; 0]*deg, ND_FlocModulesLarge)
FlocModLastFittedCap := CapF([
    {
        (Floc_Origin[0] - X_FlocBaffles[N_FlocChannelBafflesShort[0] - 1, 0] + (CapDiameter(ND_FlocModulesMain)/2 - outerradius(ND_FlocModulesMain))) if N_FlocChannelBafflesShort[0] ≥ 1
        (Floc_Origin[0] - X_FlocBaffles[0, 0] + (CapDiameter(ND_FlocModulesMain)/2 - outerradius(ND_FlocModulesMain))) otherwise
    };
    LargeCap_Origin[1];
    LargeCap_Origin[2]
], [180; 0]*deg, ND_FlocModulesMain)
# FlocModCapFrz
# only if the short baffle doesn't have one baffle!!!
SelectFlocMod1Coupling := SelectLayer("FlocModCouplingPlu")
LastFlocModCoupling := CouplingF([
    Floc_Origin[0] - X_FlocBaffles[N_FlocChannelBaffles[0] - 1, 0] + CouplingLength(ND_FlocModulesMain) - SocketDepth(ND_FlocModulesMain);
    ModuleCoupling_Origin[1];
    ModuleCoupling_Origin[2]
], [0; 0]*deg, ND_FlocModulesMain, PS_Modules)
# FlocModCouplingFrz
# ThawFlocModComponents
ArrayTankModules := array_all(N_FlocChannels - 1, 1, -(W_FlocChannel + T_PlantWall))
MirrorTankModules :=
    Local ← ZoomWindow([-L_Sed - zc; (W_FlocChannel + T_PlantWall)*N_FlocChannels; 0] + Floc_Origin, Floc_Origin + [zc; zc; zc])
    for i ∈ 0 .. max(0, floor((N_FlocChannels - 1)/2) - 1)
        ModuleWindows[i, 0] ← [
            -L_Sed - zc;
            -i*(2*W_FlocChannel + T_PlantWall) + (N_FlocChannels - 1)*(W_FlocChannel + T_FlocChannelWall) - T_FlocChannelWall - W_FlocChannel/2;
            0
        ] + Floc_Origin
        ModuleWindows[i, 1] ← [
            zc;
            -i*(2*W_FlocChannel + T_PlantWall) + (N_FlocChannels - 1)*(W_FlocChannel + T_FlocChannelWall) - T_FlocChannelWall;
            0
        ] + Floc_Origin
    SelectMods ← SelectWindow(ModuleWindows)
    MirrorMods ← MirrorSelection([Floc_Origin[0] - L_Sed/2; Floc_Origin[1]], [Floc_Origin[0] - L_Sed/2; Floc_Origin[1] + zc], "y")
    Local ← stack(Local, SelectMods, MirrorMods)
    Local
FlocMod1Overlap :=
    stack(FlocMod1CapLayer, FlocModLargeCap, FlocModFittedCap, FlocMod1CapFrz, FlocMod1CouplingLayer, FlocModCoupling, FlocMod1CouplingFrz, FlocMod1PipeLayer, FlocModLongPipe, FlocModConnectorPipe, FlocMod1PipeFrz, FlocMod1Spacer, ThawFlocMod1Components, ArrayFlocModX, FrzFlocModComponents, SelectFlocMod1Piping, FlocModRightPipe, FlocMod1PipeFrz, SelectFlocMod1PipeCap, FlocModLastLargeCap, FlocModLastFittedCap, FlocMod1CapFrz, ThawFlocMod1Components, FrzFlocModComponents) if N_FlocChannelBafflesShort[0] < 2 and N_FlocChannels == 2
    stack(FlocMod1CapLayer, FlocModLargeCap, FlocModFittedCap, FlocMod1CapFrz, FlocMod1CouplingLayer, FlocModCoupling, FlocMod1CouplingFrz, FlocMod1PipeLayer, FlocModLongPipe, FlocModConnectorPipe, FlocMod1PipeFrz, FlocMod1Spacer, ThawFlocMod1Components, ArrayFlocModX, FrzFlocModComponents, FlocShortBaffleSpacers1, FlocMod1SpacerFrz, SelectFlocMod1Piping, FlocModRightPipe, FlocMod1PipeFrz, SelectFlocMod1PipeCap, FlocModLastLargeCap, FlocModLastFittedCap, FlocMod1CapFrz, SelectFlocMod1Coupling, LastFlocModCoupling, FlocMod1CouplingFrz, ThawFlocMod1Components, ArrayTankModules, MirrorTankModules, FrzFlocModComponents) if N_FlocChannels == 2 and N_FlocChannelBafflesShort[0] ≥ 2
    stack(FlocMod1CapLayer, FlocModLargeCap, FlocModFittedCap, FlocMod1CapFrz, FlocMod1CouplingLayer, FlocModCoupling, FlocMod1CouplingFrz, FlocMod1PipeLayer, FlocModLongPipe, FlocModConnectorPipe, FlocMod1PipeFrz, FlocMod1Spacer, ThawFlocMod1Components, ArrayFlocModX, FrzFlocModComponents, SelectFlocMod1Piping, FlocModRightPipe, FlocMod1PipeFrz, SelectFlocMod1PipeCap, FlocModLastLargeCap, FlocModLastFittedCap, FlocMod1CapFrz, ThawFlocMod1Components, ArrayTankModules, MirrorTankModules, FrzFlocModComponents) if N_FlocChannelBafflesShort[0] < 2
    stack(FlocMod1CapLayer, FlocModLargeCap, FlocModFittedCap, FlocMod1CapFrz, FlocMod1CouplingLayer, FlocModCoupling, FlocMod1CouplingFrz, FlocMod1PipeLayer, FlocModLongPipe, FlocModConnectorPipe, FlocMod1PipeFrz, FlocMod1Spacer, ThawFlocMod1Components, ArrayFlocModX, FrzFlocModComponents, FlocShortBaffleSpacers1, FlocMod1SpacerFrz, SelectFlocMod1Piping, FlocModRightPipe, FlocMod1PipeFrz, SelectFlocMod1PipeCap, FlocModLastLargeCap, FlocModLastFittedCap, FlocMod1CapFrz, SelectFlocMod1Coupling, LastFlocModCoupling, FlocMod1CouplingFrz, ThawFlocMod1Components, ArrayTankModules, MirrorTankModules, FrzFlocModComponents) otherwise
# Module Piping for Last Channel (overlapping)
LargeCapLast_Origin := [
    Floc_Origin[0] + X_FlocBaffles[N_FlocChannelBaffles[last(N_FlocChannelBaffles)] - 1, cols(X_FlocBaffles) - 1] + CapThickness(ND_FlocModulesLarge) - L_Sed + T_FlocBaffle;
    Floc_Origin[1] - .05 m + W_FlocChannel;
    Floc_Origin[2] + 4*S_ModulePipesV + S_FlocBaffle[last(S_FlocBaffle)]*Pi_FlocBaffle - .05 m
]
FittedCapLast_Origin := [-T_FlocBaffle - CapThickness(ND_FlocModulesLarge) - CapThickness(ND_FlocModulesMain); 0 m; 0 m] + LargeCapLast_Origin
FlocModCouplingLast_Origin := FittedCapLast_Origin + [-L_FlocModuleLong[last(L_FlocModuleLong)]; 0 m; 0 m]
ConnectorPipeLast_Origin := FlocModCouplingLast_Origin + [-CouplingLength(ND_FlocModulesMain) + 2*SocketDepth(ND_FlocModulesMain); 0 m; 0 m]
# FrzFlocModComponents
# SelectFlocModPipeCap
FlocModLargeCapLast := CapF(LargeCapLast_Origin, [180; 0]*deg, ND_FlocModulesLarge)
ArrayFlocModXCap := ArrayLast(1, N_FlocChannelModulesLong[last(N_FlocChannelModulesLong)] + 1*(N_FlocChannelBafflesShort[last(N_FlocChannelBafflesShort)] > 0), -(B_FlocBaffle[last(B_FlocBaffle)]*N_FlocChannelBafflesLong[last(N_FlocChannelBafflesLong)]))
FlocModFittedCapLast := CapF(FittedCapLast_Origin, [0; 0]*deg, ND_FlocModulesMain)
# ArrayFlocModXCap
# FlocModCapFrz
FlocMod1CouplingSelect := SelectLayer("FlocModCouplingPlu")
FlocModCouplingLast := CouplingF(FlocModCouplingLast_Origin, [0; 0]*deg, ND_FlocModulesMain, PS_Modules)
FlocMod1CouplingFrz := FreezeLayer("FlocModCouplingPlu")  # must freeze this layer to ensure it gets grouped
FlocMod1PipeSelect := SelectLayer("FlocModPipePlu")
FlocModLongPipeLast := PipeF(FittedCapLast_Origin, L_FlocModuleLong[last(L_FlocModuleLong)], [0; 0]*deg, ND_FlocModulesMain, PS_Modules)
ArrayFlocModXLast := ArrayLast(1, N_FlocChannelModulesLong[last(N_FlocChannelModulesLong)], -(B_FlocBaffle[last(B_FlocBaffle)]*N_FlocChannelBafflesLong[last(N_FlocChannelBafflesLong)]))
FlocModConnectorPipeLast :=
    PipeF(ConnectorPipeLast_Origin, S_FlocBaffle[last(S_FlocBaffle)] - CouplingLength(ND_FlocModulesMain) + SocketDepth(ND_FlocModulesMain) - CapThickness(ND_FlocModulesLarge), [0; 0]*deg, ND_FlocModulesMain, PS_Modules) if N_FlocChannelModulesLong[last(N_FlocChannelModulesLong)] - 1 < 2
    stack(PipeF(ConnectorPipeLast_Origin, S_FlocBaffle[last(S_FlocBaffle)] - CouplingLength(ND_FlocModulesMain) + SocketDepth(ND_FlocModulesMain) - CapThickness(ND_FlocModulesLarge), [0; 0]*deg, ND_FlocModulesMain, PS_Modules), ArrayLast(1, N_FlocChannelModulesLong[last(N_FlocChannelModulesLong)] - 1, -(B_FlocBaffle[last(B_FlocBaffle)]*N_FlocChannelBafflesLong[last(N_FlocChannelBafflesLong)]))) otherwise
LastFlocModConnectorPipe := PipeF([
    Plant_Origin[0] - L_Sed + X_FlocBaffles[0, N_FlocChannels - 1] - CouplingLength(ND_FlocModulesMain) + SocketDepth(ND_FlocModulesMain);
    ConnectorPipeLast_Origin[1];
    ConnectorPipeLast_Origin[2]
], X_FlocBaffles[0, N_FlocChannels - 1] - CouplingLength(ND_FlocModulesMain) + SocketDepth(ND_FlocModulesMain), [0; 0]*deg, ND_FlocModulesMain, PS_Modules)
LastFlocModShortPipe :=
    if N_FlocChannelBafflesShort[last(N_FlocChannelBafflesShort)] ≠ 0
        PipeF([
            (Plant_Origin[0] - X_FlocBaffles[N_FlocChannelBafflesLong[last(N_FlocChannelBafflesLong)]*N_FlocChannelModulesLong[last(N_FlocChannelModulesLong)], N_FlocChannels - 1]) - CapThickness(ND_FlocModulesMain) - T_FlocBaffle;
            ConnectorPipeLast_Origin[1];
            ConnectorPipeLast_Origin[2]
        ], L_FlocModuleShort[last(L_FlocModuleShort)], [0; 0]*deg, ND_FlocModulesMain, PS_Modules)
    "0" otherwise
FlocModEndPipeLast := PipeF([
    Floc_Origin[0] - X_FlocBaffles[N_FlocChannelBaffles[last(N_FlocChannelBaffles)] - 1, N_FlocChannels - 1] - T_FlocBaffle - CouplingLength(ND_FlocModulesMain) + SocketDepth(ND_FlocModulesMain);
    FittedCapLast_Origin[1];
    FittedCapLast_Origin[1]
], L_Sed - X_FlocBaffles[N_FlocChannelBaffles[last(N_FlocChannelBaffles)] - 1, N_FlocChannels - 1] - CouplingLength(ND_FlocModulesMain) + SocketDepth(ND_FlocModulesMain) - T_FlocBaffle, [0; 0]*deg, ND_FlocModulesMain, PS_Modules)
# FlocModPipeFrz
FlocModSpacerPipeLast :=
    Local ← stack(SelectLayer("FlocModSpacerPlu"), PipeF(FittedCapLast_Origin + [CapThickness(ND_FlocModulesMain) - CapHeight(ND_FlocModulesMain); 0; 0], S_FlocBaffle[N_FlocChannels - 1] - CapHeight(ND_FlocModulesMain), [0; 0]*deg, ND_SpacerPipe, PS_Modules), ArrayFlocModXLast)
    if N_FlocChannelBafflesLong[N_FlocChannels - 1] > 2
        for i ∈ 0 .. N_FlocChannelBafflesLong[N_FlocChannels - 1] - 3
            Local ← stack(Local, PipeF(FittedCapLast_Origin - [
                S_FlocBaffle[0] - CapThickness(ND_FlocModulesMain) + T_FlocBaffle + B_FlocBaffle[N_FlocChannels - 1]*i;
                0;
                0
            ], S_FlocBaffle[N_FlocChannels - 1], [0; 0]*deg, ND_SpacerPipe, PS_Modules), ArrayFlocModXLast)
    Local
SelectFlocMod1Spacer := SelectLayer("FlocModSpacerPlu")
FlocModSpacerPipeLastShort1 :=
    if N_FlocChannelBafflesShort[last(N_FlocChannelBafflesShort)] ≠ 0
        PipeF([
            Plant_Origin[0] - X_FlocBaffles[N_FlocChannelBafflesLong[last(N_FlocChannelBafflesLong)]*N_FlocChannelModulesLong[last(N_FlocChannelModulesLong)], N_FlocChannels - 1] - CapHeight(ND_FlocModulesMain) - T_FlocBaffle;
            FittedCapLast_Origin[1];
            FittedCapLast_Origin[2]
        ], S_FlocBaffle[N_FlocChannels - 1] - CapHeight(ND_FlocModulesMain), [0; 0]*deg, ND_SpacerPipe, PS_Modules)
    "0" otherwise
FlocModSpacerPipeLastShort2 :=
    if N_FlocChannelBafflesShort[last(N_FlocChannelBafflesShort)] ≠ 0
        PipeF([
            Plant_Origin[0] - X_FlocBaffles[(N_FlocChannelBafflesShort[last(N_FlocChannelBafflesShort)] ≠ 0)*(N_FlocChannelBafflesLong[last(N_FlocChannelBafflesLong)]*N_FlocChannelModulesLong[last(N_FlocChannelModulesLong)] + 1), N_FlocChannels - 1] - T_FlocBaffle;
            FittedCapLast_Origin[1];
            FittedCapLast_Origin[2]
        ], S_FlocBaffle[N_FlocChannels - 1], [0; 0]*deg, ND_SpacerPipe, PS_Modules)
    "0" otherwise
ArrayModSpacerShortLast := ArrayLast(1, N_FlocChannelBafflesShort[last(N_FlocChannelBafflesShort)] - 2, -B_FlocBaffle[last(B_FlocBaffle)])
FlocModSpacerPipeLastShortEnd := PipeF([
    Plant_Origin[0] - X_FlocBaffles[N_FlocChannelBaffles[last(N_FlocChannelBaffles)] - 1, N_FlocChannels - 1] - T_FlocBaffle;
    FittedCapLast_Origin[1];
    FittedCapLast_Origin[2]
], L_Sed - X_FlocBaffles[N_FlocChannelBaffles[last(N_FlocChannelBaffles)] - 1, N_FlocChannels - 1], [0; 0]*deg, ND_SpacerPipe, PS_Modules)
# SelectFlocModCoupling
FlocModCouplingLastEnd := CouplingF([
    Floc_Origin[0] - X_FlocBaffles[N_FlocChannelBaffles[last(N_FlocChannelBaffles)] - 1, N_FlocChannels - 1] - T_FlocBaffle - SocketDepth(ND_FlocModulesMain);
    FittedCapLast_Origin[1];
    FittedCapLast_Origin[2]
], [0; 0]*deg, ND_FlocModulesMain, PS_Modules)
# FlocModCouplingFrz
FlocModSpacerShortLast :=
    stack(SelectFlocMod1Spacer, FlocModSpacerPipeLastShort1, FlocMod1SpacerFrz) if N_FlocChannelBafflesShort[last(N_FlocChannelBafflesShort)] == 2
    stack(SelectFlocMod1Spacer, FlocModSpacerPipeLastShort1, FlocModSpacerPipeLastShort2, ArrayModSpacerShortLast, FlocMod1SpacerFrz) otherwise
FlocModLast :=
    stack(SelectFlocMod1PipeCap, FlocModLargeCapLast, ArrayFlocModXCap, FlocModFittedCapLast, ArrayFlocModXCap, FlocMod1CapFrz, FlocMod1CouplingSelect, FlocModCouplingLast, ArrayFlocModXLast, FlocMod1CouplingFrz, FlocMod1PipeSelect, FlocModLongPipeLast, ArrayFlocModXLast, FlocModConnectorPipeLast, LastFlocModConnectorPipe, FlocMod1PipeFrz, FlocModSpacerPipeLast, FrzFlocModComponents) if N_FlocChannelBafflesShort[last(N_FlocChannelBafflesShort)] == 0
    stack(SelectFlocMod1PipeCap, FlocModLargeCapLast, ArrayFlocModXCap, FlocModFittedCapLast, ArrayFlocModXCap, FlocMod1CapFrz, FlocMod1CouplingSelect, FlocModCouplingLast, ArrayFlocModXLast, FlocMod1CouplingFrz, FlocMod1PipeSelect, FlocModLongPipeLast, ArrayFlocModXLast, FlocModConnectorPipeLast, LastFlocModShortPipe, FlocModEndPipeLast, FlocMod1PipeFrz, SelectFlocMod1Coupling, FlocModCouplingLastEnd, FlocMod1CouplingFrz, FlocModSpacerPipeLast, FrzFlocModComponents) otherwise
ThawAllFlocModules := ThawMultiple(["FlocMod*Plu"])
ArrayFlocModY := array_all(2, 1, -W_FlocChannel + 4*S_Fitting)
# ArrayModulesY and ArrayModulesZ array new pipes to within 0.05m of each wall.
ArrayFlocModZ := array_all(3, 1, (-S_ModulePipesV*4 + .1 m)/2)
FlocModulesOverlapping :=
    FlocMod1Overlap if Q_Plant ≤ Q_PlantMaxLF
    stack(FlocMod1Overlap, FlocModLast, ThawAllFlocModules, ArrayFlocModY, view("f"), ArrayFlocModZ, view("t"), FrzFlocModComponents) otherwise
# Module Piping for Beginning Channels (non-overlapping)
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# FlocMod1CapLayer
FlocModLargeCapUpper := CapF([
    LargeCap_Origin[0] + B_FlocBaffle[0];
    LargeCap_Origin[1];
    Floc_Origin[2] + H_Floc - 0.5*H_PlantFreeboard - S_Fitting - ConRadius(ND_FlocModulesLarge)
], [0; 0]*deg, ND_FlocModulesLarge)
FlocModLargeCapMiddle := CapF(LargeCap_Origin, [0; 0]*deg, ND_FlocModulesLarge)
FlocModLargeCapLower := CapF([
    LargeCap_Origin[0];
    LargeCap_Origin[1];
    Floc_Origin[2] + S_Fitting + L_BafflePort + ConRadius(ND_FlocModulesLarge)
], [0; 0]*deg, ND_FlocModulesLarge)
FlocModFittedCapUpper := CapF([
    FittedCap_Origin[0] + B_FlocBaffle[0];
    FittedCap_Origin[1];
    Floc_Origin[2] + H_Floc - 0.5*H_PlantFreeboard - S_Fitting - ConRadius(ND_FlocModulesLarge)
], [180; 0]*deg, ND_FlocModulesMain)
FlocModFittedCapMiddle := CapF(FittedCap_Origin, [180; 0]*deg, ND_FlocModulesMain)
FlocModFittedCapLower := CapF([
    FittedCap_Origin[0];
    FittedCap_Origin[1];
    Floc_Origin[2] + S_Fitting + L_BafflePort + ConRadius(ND_FlocModulesLarge)
], [180; 0]*deg, ND_FlocModulesMain)
# FlocMod1CapFrz
# FlocMod1CouplingLayer
FlocModCouplingUpper := CouplingF([
    ModuleCoupling_Origin[0];
    ModuleCoupling_Origin[1];
    Floc_Origin[2] + H_Floc - 0.5*H_PlantFreeboard - S_Fitting - ConRadius(ND_FlocModulesLarge)
], [0; 0]*deg, ND_FlocModulesMain, PS_Modules)
FlocModCouplingMiddle := CouplingF(ModuleCoupling_Origin, [0; 0]*deg, ND_FlocModulesMain, PS_Modules)
FlocModCouplingLower := CouplingF([
    ModuleCoupling_Origin[0] - B_FlocBaffle[0];
    ModuleCoupling_Origin[1];
    Floc_Origin[2] + S_Fitting + L_BafflePort + ConRadius(ND_FlocModulesLarge)
], [0; 0]*deg, ND_FlocModulesMain, PS_Modules)
# FlocMod1CouplingFrz | must freeze this layer to ensure it gets grouped
# FlocMod1PipeLayer
FlocModLongPipeUpper := PipeF([
    FittedCap_Origin[0] + L_FlocModuleLongOuter[0] + B_FlocBaffle[0];
    FittedCap_Origin[1];
    Floc_Origin[2] + H_Floc - 0.5*H_PlantFreeboard - S_Fitting - ConRadius(ND_FlocModulesLarge)
], L_FlocModuleLongOuter[0], [0; 0]*deg, ND_FlocModulesMain, PS_Modules)
FlocModLongPipeMiddle := PipeF(LongPipe_Origin, L_FlocModuleLong[0], [0; 0]*deg, ND_FlocModulesMain, PS_Modules)
FlocModLongPipeLower := PipeF([
    FittedCap_Origin[0] + L_FlocModuleLongOuter[0];
    FittedCap_Origin[1];
    Floc_Origin[2] + S_Fitting + L_BafflePort + ConRadius(ND_FlocModulesLarge)
], L_FlocModuleLongOuter[0], [0; 0]*deg, ND_FlocModulesMain, PS_Modules)
# FlocMod1PipeFrz
FlocModConnectPipeLayer := layer_new("FlocModConnectPipePlu", blue)
FlocModConnectorPipeUpper := PipeF([
    ConnectorPipe_Origin[0] + B_FlocBaffle[0];
    ConnectorPipe_Origin[1];
    Floc_Origin[2] + H_Floc - 0.5*H_PlantFreeboard - S_Fitting - ConRadius(ND_FlocModulesLarge)
], L_FlocModuleConnectorOuter[0], [0; 0]*deg, ND_FlocModulesMain, PS_Modules)
FlocModConnectorPipeMiddle := PipeF(ConnectorPipe_Origin, L_FlocModuleConnector[0], [0; 0]*deg, ND_FlocModulesMain, PS_Modules)
FlocModConnectorPipeLower := PipeF([
    ConnectorPipe_Origin[0];
    ConnectorPipe_Origin[1];
    Floc_Origin[2] + S_Fitting + L_BafflePort + ConRadius(ND_FlocModulesLarge)
], L_FlocModuleConnectorOuter[0], [0; 0]*deg, ND_FlocModulesMain, PS_Modules)
FlocModConnectPipeFrz := FreezeLayer("FlocModConnectPipePlu")
FlocMod1SpacerLayer := layer_new("FlocModSpacerPlu", blue)
FlocModSpacerPipe1Middle := PipeF(FittedCap_Origin + [S_FlocBaffle[0] - CapThickness(ND_FlocModulesMain); 0; 0], S_FlocBaffle[0] - CapHeight(ND_FlocModulesMain), [0; 0]*deg, ND_SpacerPipe, PS_Modules)
FlocModSpacerPipe2Middle := PipeF(FittedCap_Origin + [2*S_FlocBaffle[0] - CapThickness(ND_FlocModulesMain) + T_FlocBaffle; 0; 0], S_FlocBaffle[0], [0; 0]*deg, ND_SpacerPipe, PS_Modules)
# ArrayFlocModSpacer
FlocModSpacerUpper1 := PipeF([
    Floc_Origin[0] - L_Sed + X_FlocBaffles[1, 0] + 2*B_FlocBaffle[0];
    FittedCap_Origin[1];
    Floc_Origin[2] + H_Floc - 0.5*H_PlantFreeboard - S_Fitting - ConRadius(ND_FlocModulesLarge)
], 2*S_FlocBaffle[0] - CapHeight(ND_FlocModulesMain) + T_FlocBaffle, [0; 0]*deg, ND_SpacerPipe, PS_Modules)
FlocModSpacerUpper2 := PipeF([
    Floc_Origin[0] - L_Sed + X_FlocBaffles[1, 0] + 4*B_FlocBaffle[0];
    FittedCap_Origin[1];
    Floc_Origin[2] + H_Floc - 0.5*H_PlantFreeboard - S_Fitting - ConRadius(ND_FlocModulesLarge)
], 2*S_FlocBaffle[0] + T_FlocBaffle, [0; 0]*deg, ND_SpacerPipe, PS_Modules)
FlocModSpacerLower1 := PipeF([
    Floc_Origin[0] - L_Sed + X_FlocBaffles[0, 0] + 2*B_FlocBaffle[0];
    FittedCap_Origin[1];
    Floc_Origin[2] + S_Fitting + L_BafflePort + ConRadius(ND_FlocModulesLarge)
], 2*S_FlocBaffle[0] - CapHeight(ND_FlocModulesMain) + T_FlocBaffle, [0; 0]*deg, ND_SpacerPipe, PS_Modules)
FlocModSpacerLower2 := PipeF([
    Floc_Origin[0] - L_Sed + X_FlocBaffles[0, 0] + 4*B_FlocBaffle[0];
    FittedCap_Origin[1];
    Floc_Origin[2] + S_Fitting + L_BafflePort + ConRadius(ND_FlocModulesLarge)
], 2*S_FlocBaffle[0] + T_FlocBaffle, [0; 0]*deg, ND_SpacerPipe, PS_Modules)
ArrayFlocModSpacerOuter := ArrayLast(1, (N_FlocChannelBafflesLong[0] - 2)/2, 2*B_FlocBaffle[0])
# FlocMod1SpacerFrz
FlocMod1SpacerNO :=
    stack(FlocMod1SpacerLayer, FlocModSpacerPipe1Middle, FlocModSpacerPipe2Middle, ArrayFlocModSpacer, FlocModSpacerUpper1, FlocModSpacerLower1, FlocMod1SpacerFrz) if N_FlocChannelBafflesLong[0] == 4
    stack(FlocMod1SpacerLayer, FlocModSpacerPipe1Middle, FlocModSpacerPipe2Middle, ArrayFlocModSpacer, FlocModSpacerUpper1, FlocModSpacerUpper2, FlocModSpacerLower1, FlocModSpacerLower2, FlocMod1SpacerFrz) if N_FlocChannelBafflesLong[0] == 6
    stack(FlocMod1SpacerLayer, FlocModSpacerPipe1Middle, FlocModSpacerPipe2Middle, ArrayFlocModSpacer, FlocModSpacerUpper1, FlocModSpacerUpper2, ArrayFlocModSpacerOuter, FlocModSpacerLower1, FlocModSpacerLower2, ArrayFlocModSpacerOuter, FlocMod1SpacerFrz) otherwise
ThawFlocModPieces := ThawMultiple(["FlocModCapPlu"; "FlocModPipePlu"; "FlocModSpacerPlu"; "FlocModCouplingPlu"])
# ArrayFlocModX
# FrzFlocModComponents
ThawFlocModPieces2 := ThawMultiple(["FlocModConnectPipePlu"])
ArrayFlocModXLess := array_all(1, N_FlocChannelModulesLong[0] - 1, B_FlocBaffle[0]*N_FlocChannelBafflesLong[0])
# FrzFlocModComponents
FlocModThawArray :=
    stack(ThawFlocModPieces, ArrayFlocModX, FrzFlocModComponents) if N_FlocChannelModulesLong[0] == 2
    stack(ThawFlocModPieces, ArrayFlocModX, FrzFlocModComponents, ThawFlocModPieces2, ArrayFlocModXLess, FrzFlocModComponents) otherwise
# SelectFlocMod1Spacer
FlocModSpacerPipe1Short := PipeF([
    Plant_Origin[0] - X_FlocBaffles[(N_FlocChannelBafflesShort[0] - 2)*(N_FlocChannelBafflesShort[0] > 2), 0] - T_FlocBaffle;
    FittedCap_Origin[1];
    FittedCap_Origin[2]
], S_FlocBaffle[0] - CapHeight(ND_FlocModulesMain), [0; 0]*deg, ND_SpacerPipe, PS_Modules)
FlocModSpacerPipe2Short := PipeF([
    Plant_Origin[0] - X_FlocBaffles[(N_FlocChannelBafflesShort[0] - 3)*(N_FlocChannelBafflesShort[0] > 2), 0] - T_FlocBaffle;
    FittedCap_Origin[1];
    FittedCap_Origin[2]
], S_FlocBaffle[0], [0; 0]*deg, ND_SpacerPipe, PS_Modules)
ArrayFlocModSpacerShort := ArrayLast(1, N_FlocChannelBafflesShort[0] - 2, B_FlocBaffle[0])
FlocModSpacerLowerEnd := PipeF([
    Plant_Origin[0] - X_FlocBaffles[(N_FlocChannelBafflesShort[0] - 3)*(N_FlocChannelBafflesShort[0] > 2), 0] - T_FlocBaffle;
    FittedCap_Origin[1];
    Floc_Origin[2] + S_Fitting + L_BafflePort + ConRadius(ND_FlocModulesLarge)
], 2*S_FlocBaffle[0] - CapHeight(ND_FlocModulesMain) + T_FlocBaffle, [0; 0]*deg, ND_SpacerPipe, PS_Modules)
ArrayFlocModSpacerShortLower := ArrayLast(1, floor((N_FlocChannelBafflesShort[0] - 2)/2), B_FlocBaffle[0])
FlocModSpacerUpper := PipeF([
    Plant_Origin[0] - X_FlocBaffles[(N_FlocChannelBafflesShort[0] - 3)*(N_FlocChannelBafflesShort[0] > 2), 0] + S_FlocBaffle[0];
    FittedCap_Origin[1];
    Floc_Origin[2] + H_Floc - 0.5*H_PlantFreeboard - S_Fitting - ConRadius(ND_FlocModulesLarge)
], 2*S_FlocBaffle[0] - CapHeight(ND_FlocModulesMain) + T_FlocBaffle, [0; 0]*deg, ND_SpacerPipe, PS_Modules)
ArrayFlocModSpacerShortUpper := ArrayLast(1, floor((N_FlocChannelBafflesShort[0] - 2)/2) - 1, B_FlocBaffle[0])
FlocShortBaffleSpacers1 :=
    stack(SelectFlocMod1Spacer, FlocModSpacerPipe1Short, FlocModSpacerPipe2Short, FlocModSpacerLowerEnd) if N_FlocChannelBafflesShort[0] == 3
    stack(SelectFlocMod1Spacer, FlocModSpacerPipe1Short, FlocModSpacerPipe2Short, ArrayFlocModSpacerShort, FlocModSpacerLowerEnd, ArrayFlocModSpacerShortLower, FlocModSpacerUpper) if N_FlocChannelBafflesShort[0] == 5
    stack(SelectFlocMod1Spacer, FlocModSpacerPipe1Short, FlocModSpacerPipe2Short, ArrayFlocModSpacerShort, FlocModSpacerLowerEnd, ArrayFlocModSpacerShortLower, FlocModSpacerUpper, ArrayFlocModSpacerShortUpper) otherwise
# FlocModSpacerFrz
SelectFlocMod1Piping := SelectLayer("FlocModPipePlu")
FlocModPipeShortUpper := PipeF([
    Plant_Origin[0] - X_FlocBaffles[1, 0] + SocketDepth(ND_FlocModulesMain);
    FittedCap_Origin[1];
    Floc_Origin[2] + S_Fitting + L_BafflePort + ConRadius(ND_FlocModulesLarge)
], (N_FlocChannelBafflesShort[0] - 3)*(S_FlocBaffle[0] + T_FlocBaffle) - CapThickness(ND_FlocModulesMain) + SocketDepth(ND_FlocModulesMain), [0; 0]*deg, ND_FlocModulesMain, PS_Modules)
FlocModPipeShortMiddle := PipeF([
    Plant_Origin[0] - X_FlocBaffles[0, 0] + SocketDepth(ND_FlocModulesMain);
    FittedCap_Origin[1];
    FittedCap_Origin[2]
], (N_FlocChannelBafflesShort[0] - 1)*(S_FlocBaffle[0] + T_FlocBaffle) - CapThickness(ND_FlocModulesMain) + SocketDepth(ND_FlocModulesMain), [0; 0]*deg, ND_FlocModulesMain, PS_Modules)
FlocModPipeShortLower := PipeF([
    Plant_Origin[0] - X_FlocBaffles[0, 0] + SocketDepth(ND_FlocModulesMain);
    FittedCap_Origin[1];
    Floc_Origin[2] + S_Fitting + L_BafflePort + ConRadius(ND_FlocModulesLarge)
], (N_FlocChannelBafflesShort[0] - 1)*(S_FlocBaffle[0] + T_FlocBaffle) - CapThickness(ND_FlocModulesMain) + SocketDepth(ND_FlocModulesMain), [0; 0]*deg, ND_FlocModulesMain, PS_Modules)
FlocModEndPipeUpper := PipeF([
    Floc_Origin[0];
    LargeCap_Origin[1];
    Floc_Origin[2] + H_Floc - 0.5*H_PlantFreeboard - S_Fitting - ConRadius(ND_FlocModulesLarge)
], {
    (2*S_FlocBaffle[0] + T_FlocBaffle - CapThickness(ND_FlocModulesMain)) if N_FlocChannelBafflesShort[0] == 3
    (2*S_FlocBaffle[0] + T_FlocBaffle - CouplingLength(ND_FlocModulesMain) + SocketDepth(ND_FlocModulesMain)) otherwise
}, [0; 0]*deg, ND_FlocModulesMain, PS_Modules)
FlocModEndPipeMiddle := PipeF([Floc_Origin[0]; LargeCap_Origin[1]; LargeCap_Origin[2]], {
    (S_FlocBaffle[0] - CapThickness(ND_FlocModulesMain)) if N_FlocChannelBafflesShort[0] == 1
    (S_FlocBaffle[0] - CouplingLength(ND_FlocModulesMain) + SocketDepth(ND_FlocModulesMain)) otherwise
}, [0; 0]*deg, ND_FlocModulesMain, PS_Modules)
FlocModEndPipeLower := PipeF([
    Floc_Origin[0];
    LargeCap_Origin[1];
    Floc_Origin[2] + S_Fitting + L_BafflePort + ConRadius(ND_FlocModulesLarge)
], {
    (S_FlocBaffle[0] - CapThickness(ND_FlocModulesMain)) if N_FlocChannelBafflesShort[0] == 1
    (S_FlocBaffle[0] - CouplingLength(ND_FlocModulesMain) + SocketDepth(ND_FlocModulesMain)) otherwise
}, [0; 0]*deg, ND_FlocModulesMain, PS_Modules)
# FlocModPipeFrz
FlocModShortAndEndPipes :=
    stack(SelectFlocMod1Piping, FlocModEndPipeUpper, FlocModEndPipeMiddle, FlocModEndPipeLower, FlocMod1PipeFrz) if N_FlocChannelBafflesShort[0] == 1
    stack(SelectFlocMod1Piping, FlocModEndPipeUpper, FlocModEndPipeMiddle, FlocModEndPipeLower, FlocModPipeShortMiddle, FlocModPipeShortLower, FlocMod1PipeFrz) if N_FlocChannelBafflesShort[0] == 3
    stack(SelectFlocMod1Piping, FlocModEndPipeUpper, FlocModEndPipeMiddle, FlocModEndPipeLower, FlocModPipeShortUpper, FlocModPipeShortMiddle, FlocModPipeShortLower, FlocMod1PipeFrz) otherwise
SelectFlocMod1PipeCap := SelectLayer("FlocModCapPlu")
FlocModEndLargeCapUpper :=
    if N_FlocChannelBafflesShort[0] > 1
        CapF([
            Floc_Origin[0] - X_FlocBaffles[N_FlocChannelBafflesShort[0] - 2, 0] - T_FlocBaffle - CapThickness(ND_FlocModulesLarge);
            LargeCap_Origin[1];
            Floc_Origin[2] + H_Floc - 0.5*H_PlantFreeboard - S_Fitting - ConRadius(ND_FlocModulesLarge)
        ], [0; 0]*deg, ND_FlocModulesLarge)
    "0" otherwise
FlocModEndLargeCapMiddle :=
    if N_FlocChannelBafflesShort[0] > 0
        CapF([
            Floc_Origin[0] - X_FlocBaffles[N_FlocChannelBafflesShort[0] - 1, 0] - T_FlocBaffle - CapThickness(ND_FlocModulesLarge);
            LargeCap_Origin[1];
            LargeCap_Origin[2]
        ], [0; 0]*deg, ND_FlocModulesLarge)
    "0" otherwise
FlocModEndLargeCapLower :=
    if N_FlocChannelBafflesShort[0] > 0
        CapF([
            Floc_Origin[0] - X_FlocBaffles[N_FlocChannelBafflesShort[0] - 1, 0] - T_FlocBaffle - CapThickness(ND_FlocModulesLarge);
            LargeCap_Origin[1];
            Floc_Origin[2] + S_Fitting + L_BafflePort + ConRadius(ND_FlocModulesLarge)
        ], [0; 0]*deg, ND_FlocModulesLarge)
    "0" otherwise
FlocModEndFittedCapUpper :=
    if N_FlocChannelBafflesShort[0] > 1
        CapF([
            Floc_Origin[0] - X_FlocBaffles[N_FlocChannelBafflesShort[0] - 2, 0] + CapThickness(ND_FlocModulesMain);
            LargeCap_Origin[1];
            Floc_Origin[2] + H_Floc - 0.5*H_PlantFreeboard - S_Fitting - ConRadius(ND_FlocModulesLarge)
        ], [180; 0]*deg, ND_FlocModulesMain)
    "0" otherwise
FlocModEndFittedCapMiddle :=
    if N_FlocChannelBafflesShort[0] > 0
        CapF([
            Floc_Origin[0] - X_FlocBaffles[N_FlocChannelBafflesShort[0] - 1, 0] + CapThickness(ND_FlocModulesMain);
            LargeCap_Origin[1];
            LargeCap_Origin[2]
        ], [180; 0]*deg, ND_FlocModulesMain)
    "0" otherwise
FlocModEndFittedCapLower :=
    if N_FlocChannelBafflesShort[0] > 0
        CapF([
            Floc_Origin[0] - X_FlocBaffles[N_FlocChannelBafflesShort[0] - 1, 0] + CapThickness(ND_FlocModulesMain);
            LargeCap_Origin[1];
            Floc_Origin[2] + S_Fitting + L_BafflePort + ConRadius(ND_FlocModulesLarge)
        ], [180; 0]*deg, ND_FlocModulesMain)
    "0" otherwise
# FlocModCapFrz
FlocModCapsEnd :=
    stack(SelectFlocMod1PipeCap, FlocModEndLargeCapMiddle, FlocModEndLargeCapLower, FlocModEndFittedCapMiddle, FlocModEndFittedCapLower, FlocMod1CapFrz) if N_FlocChannelBafflesShort[0] == 1
    stack(SelectFlocMod1PipeCap, FlocModEndLargeCapUpper, FlocModEndLargeCapMiddle, FlocModEndLargeCapLower, FlocModEndFittedCapUpper, FlocModEndFittedCapMiddle, FlocModEndFittedCapLower, FlocMod1CapFrz) otherwise
# only if the short baffle doesn't have one baffle!!!
# SelectFlocMod1Coupling
EndFlocModCouplingUpper := CouplingF([
    Floc_Origin[0] - X_FlocBaffles[1, 0] + CouplingLength(ND_FlocModulesMain) - SocketDepth(ND_FlocModulesMain);
    ModuleCoupling_Origin[1];
    Floc_Origin[2] + H_Floc - 0.5*H_PlantFreeboard - S_Fitting - ConRadius(ND_FlocModulesLarge)
], [0; 0]*deg, ND_FlocModulesMain, PS_Modules)
EndFlocModCouplingMiddle := CouplingF([
    Floc_Origin[0] - X_FlocBaffles[0, 0] + CouplingLength(ND_FlocModulesMain) - SocketDepth(ND_FlocModulesMain);
    ModuleCoupling_Origin[1];
    ModuleCoupling_Origin[2]
], [0; 0]*deg, ND_FlocModulesMain, PS_Modules)
EndFlocModCouplingLower := CouplingF([
    Floc_Origin[0] - X_FlocBaffles[0, 0] + CouplingLength(ND_FlocModulesMain) - SocketDepth(ND_FlocModulesMain);
    ModuleCoupling_Origin[1];
    Floc_Origin[2] + S_Fitting + L_BafflePort + ConRadius(ND_FlocModulesLarge)
], [0; 0]*deg, ND_FlocModulesMain, PS_Modules)
# FlocMod1CouplingFrz
FlocModCouplingsEnd :=
    stack(SelectFlocMod1Coupling, EndFlocModCouplingMiddle, EndFlocModCouplingLower, FlocMod1CouplingFrz) if N_FlocChannelBafflesShort[0] == 3
    stack(SelectFlocMod1Coupling, EndFlocModCouplingUpper, EndFlocModCouplingMiddle, EndFlocModCouplingLower, FlocMod1CouplingFrz) otherwise
SelectFlocModConnectPipe := SelectLayer("FlocModConnectPipePlu")
FlocModConnectPipeEndUpper := PipeF([
    Floc_Origin[0] - X_FlocBaffles[N_FlocChannelBafflesShort[0], 0] + CouplingLength(ND_FlocModulesMain) - SocketDepth(ND_FlocModulesMain) + L_FlocModuleConnectorOuter[0];
    ModuleCoupling_Origin[1];
    Floc_Origin[2] + H_Floc - 0.5*H_PlantFreeboard - S_Fitting - ConRadius(ND_FlocModulesLarge)
], L_FlocModuleConnectorOuter[0], [0; 0]*deg, ND_FlocModulesMain, PS_Modules)
FlocModConnectPipeEndMiddle := PipeF([
    Floc_Origin[0] - X_FlocBaffles[N_FlocChannelBafflesShort[0], 0] + CouplingLength(ND_FlocModulesMain) - SocketDepth(ND_FlocModulesMain) + L_FlocModuleConnector[0];
    ModuleCoupling_Origin[1];
    ModuleCoupling_Origin[2]
], L_FlocModuleConnector[0], [0; 0]*deg, ND_FlocModulesMain, PS_Modules)
FlocModConnectPipeEndLower := PipeF([
    Floc_Origin[0] - X_FlocBaffles[N_FlocChannelBafflesShort[0] + 1, 0] + CouplingLength(ND_FlocModulesMain) - SocketDepth(ND_FlocModulesMain) + L_FlocModuleConnectorOuter[0];
    ModuleCoupling_Origin[1];
    Floc_Origin[2] + S_Fitting + L_BafflePort + ConRadius(ND_FlocModulesLarge)
], L_FlocModuleConnectorOuter[0], [0; 0]*deg, ND_FlocModulesMain, PS_Modules)
# FlocModConnectPipeFrz
EndFlocModConPipe :=
    stack(SelectFlocModConnectPipe, FlocModConnectPipeEndMiddle, FlocModConnectPipeEndLower, FlocModConnectPipeFrz) if N_FlocChannelBafflesShort[0] == 1
    stack(SelectFlocModConnectPipe, FlocModConnectPipeEndUpper, FlocModConnectPipeEndMiddle, FlocModConnectPipeEndLower, FlocModConnectPipeFrz) otherwise
# ThawFlocModComponents
ArrayTankModules := array_all(N_FlocChannels - 1, 1, -(W_FlocChannel + T_FlocChannelWall))
# MirrorTankModules
FlocMod1NoOverlap :=
    stack(FlocMod1CapLayer, FlocModLargeCapUpper, FlocModLargeCapMiddle, FlocModLargeCapLower, FlocModFittedCapUpper, FlocModFittedCapMiddle, FlocModFittedCapLower, FlocMod1CapFrz, FlocMod1CouplingLayer, FlocModCouplingUpper, FlocModCouplingMiddle, FlocModCouplingLower, FlocMod1CouplingFrz, FlocMod1PipeLayer, FlocModLongPipeUpper, FlocModLongPipeMiddle, FlocModLongPipeLower, FlocMod1PipeFrz, FlocModConnectPipeLayer, FlocModConnectorPipeUpper, FlocModConnectorPipeMiddle, FlocModConnectorPipeLower, FlocModConnectPipeFrz, FlocMod1SpacerNO, FlocModThawArray, FlocModCapsEnd, EndFlocModConPipe, FlocModShortAndEndPipes, ThawFlocMod1Components, ArrayTankModules, MirrorTankModules, FrzFlocModComponents) if N_FlocChannelBafflesShort[0] < 2 and (N_FlocChannels > 2 or (Q_Plant ≤ Q_PlantMaxLF))
    stack(FlocMod1CapLayer, FlocModLargeCapUpper, FlocModLargeCapMiddle, FlocModLargeCapLower, FlocModFittedCapUpper, FlocModFittedCapMiddle, FlocModFittedCapLower, FlocMod1CapFrz, FlocMod1CouplingLayer, FlocModCouplingUpper, FlocModCouplingMiddle, FlocModCouplingLower, FlocMod1CouplingFrz, FlocMod1PipeLayer, FlocModLongPipeUpper, FlocModLongPipeMiddle, FlocModLongPipeLower, FlocMod1PipeFrz, FlocModConnectPipeLayer, FlocModConnectorPipeUpper, FlocModConnectorPipeMiddle, FlocModConnectorPipeLower, FlocModConnectPipeFrz, FlocMod1SpacerNO, FlocModThawArray, FlocShortBaffleSpacers1, FlocMod1SpacerFrz, FlocModCapsEnd, FlocModCouplingsEnd, EndFlocModConPipe, FlocModShortAndEndPipes, ThawFlocMod1Components, ArrayTankModules, MirrorTankModules, FrzFlocModComponents) if N_FlocChannelBafflesShort[0] > 2 and (N_FlocChannels > 2 or (Q_Plant ≤ Q_PlantMaxLF))
    stack(FlocMod1CapLayer, FlocModLargeCapUpper, FlocModLargeCapMiddle, FlocModLargeCapLower, FlocModFittedCapUpper, FlocModFittedCapMiddle, FlocModFittedCapLower, FlocMod1CapFrz, FlocMod1CouplingLayer, FlocModCouplingUpper, FlocModCouplingMiddle, FlocModCouplingLower, FlocMod1CouplingFrz, FlocMod1PipeLayer, FlocModLongPipeUpper, FlocModLongPipeMiddle, FlocModLongPipeLower, FlocMod1PipeFrz, FlocModConnectPipeLayer, FlocModConnectorPipeUpper, FlocModConnectorPipeMiddle, FlocModConnectorPipeLower, FlocModConnectPipeFrz, FlocMod1SpacerNO, FlocModThawArray, FlocModCapsEnd, EndFlocModConPipe, FlocModShortAndEndPipes, ThawFlocMod1Components, ArrayTankModules, MirrorTankModules, FrzFlocModComponents) if N_FlocChannelBafflesShort[0] < 2 and N_FlocChannels == 2 and (Q_Plant > Q_PlantMaxLF)
    stack(FlocMod1CapLayer, FlocModLargeCapUpper, FlocModLargeCapMiddle, FlocModLargeCapLower, FlocModFittedCapUpper, FlocModFittedCapMiddle, FlocModFittedCapLower, FlocMod1CapFrz, FlocMod1CouplingLayer, FlocModCouplingUpper, FlocModCouplingMiddle, FlocModCouplingLower, FlocMod1CouplingFrz, FlocMod1PipeLayer, FlocModLongPipeUpper, FlocModLongPipeMiddle, FlocModLongPipeLower, FlocMod1PipeFrz, FlocModConnectPipeLayer, FlocModConnectorPipeUpper, FlocModConnectorPipeMiddle, FlocModConnectorPipeLower, FlocModConnectPipeFrz, FlocMod1SpacerNO, FlocModThawArray, FlocShortBaffleSpacers1, FlocMod1SpacerFrz, FlocModCapsEnd, FlocModCouplingsEnd, EndFlocModConPipe, FlocModShortAndEndPipes, ThawFlocMod1Components, FrzFlocModComponents) otherwise
# Module Piping for Last Channel (non-overlapping)
# NO for nonoverlapping
LargeCapLastNO_Origin := [
    Floc_Origin[0] + X_FlocBaffles[N_FlocChannelBaffles[last(N_FlocChannelBaffles)] - 1, cols(X_FlocBaffles) - 1] + CapThickness(ND_FlocModulesLarge) - L_Sed;
    Floc_Origin[1] - 2*S_Fitting + W_FlocChannel;
    Floc_Origin[2] + L_FlocBaffleLower - 0.5*(L_FlocBaffleLower + L_FlocBaffleUpper - (H_Floc - 0.5*H_PlantFreeboard))
]
FittedCapLastNO_Origin := [-T_FlocBaffle - CapThickness(ND_FlocModulesLarge) - CapThickness(ND_FlocModulesMain); 0 m; 0 m] + LargeCapLastNO_Origin
FlocModCouplingLastNO_Origin := FittedCapLastNO_Origin + [-L_FlocModuleLong[last(L_FlocModuleLong)]; 0 m; 0 m]
ConnectorPipeLastNO_Origin := FlocModCouplingLastNO_Origin + [-CouplingLength(ND_FlocModulesMain) + 2*SocketDepth(ND_FlocModulesMain); 0 m; 0 m]
# FrzFlocModComponents
# SelectFlocModPipeCap
FlocModLargeCapLastUpper := CapF([
    LargeCapLastNO_Origin[0] - B_FlocBaffle[last(B_FlocBaffle)];
    LargeCapLastNO_Origin[1];
    Floc_Origin[2] + H_Floc - 0.5*H_PlantFreeboard - S_Fitting - ConRadius(ND_FlocModulesLarge)
], [180; 0]*deg, ND_FlocModulesLarge)
FlocModLargeCapLastMiddle := CapF(LargeCapLastNO_Origin, [180; 0]*deg, ND_FlocModulesLarge)
FlocModLargeCapLastLower := CapF([
    LargeCapLastNO_Origin[0];
    LargeCapLastNO_Origin[1];
    Floc_Origin[2] + S_Fitting + L_BafflePort + ConRadius(ND_FlocModulesLarge)
], [180; 0]*deg, ND_FlocModulesLarge)
FlocModFittedCapLastUpper := CapF([
    FittedCapLastNO_Origin[0] - B_FlocBaffle[last(B_FlocBaffle)];
    FittedCapLastNO_Origin[1];
    Floc_Origin[2] + H_Floc - 0.5*H_PlantFreeboard - S_Fitting - ConRadius(ND_FlocModulesLarge)
], [0; 0]*deg, ND_FlocModulesMain)
FlocModFittedCapLastMiddle := CapF(FittedCapLastNO_Origin, [0; 0]*deg, ND_FlocModulesMain)
FlocModFittedCapLastLower := CapF([
    FittedCapLastNO_Origin[0];
    FittedCapLastNO_Origin[1];
    Floc_Origin[2] + S_Fitting + L_BafflePort + ConRadius(ND_FlocModulesLarge)
], [0; 0]*deg, ND_FlocModulesMain)
# array after every time a cap is drawn
ArrayFlocModXCapL := ArrayLast(1, N_FlocChannelModulesLong[last(N_FlocChannelModulesLong)] + 1*(N_FlocChannelBafflesShort[last(N_FlocChannelBafflesShort)] > 0), -(B_FlocBaffle[last(B_FlocBaffle)]*N_FlocChannelBafflesLong[last(N_FlocChannelBafflesLong)]))
# FlocModCapFrz
FlocMod1CouplingSelect := SelectLayer("FlocModCouplingPlu")
FlocModCouplingLastUpper := CouplingF([
    FittedCapLastNO_Origin[0] - L_FlocModuleLongOuter[last(L_FlocModuleLong)] - B_FlocBaffle[last(B_FlocBaffle)];
    FlocModCouplingLastNO_Origin[1];
    Floc_Origin[2] + H_Floc - 0.5*H_PlantFreeboard - S_Fitting - ConRadius(ND_FlocModulesLarge)
], [0; 0]*deg, ND_FlocModulesMain, PS_Modules)
FlocModCouplingLastMiddle := CouplingF(FlocModCouplingLastNO_Origin, [0; 0]*deg, ND_FlocModulesMain, PS_Modules)
FlocModCouplingLastLower := CouplingF([
    FittedCapLastNO_Origin[0] - L_FlocModuleLongOuter[last(L_FlocModuleLong)];
    FlocModCouplingLastNO_Origin[1];
    Floc_Origin[2] + S_Fitting + L_BafflePort + ConRadius(ND_FlocModulesLarge)
], [0; 0]*deg, ND_FlocModulesMain, PS_Modules)
ArrayFlocModXConnectL := ArrayLast(1, N_FlocChannelModulesLong[last(N_FlocChannelModulesLong)] - 1, -(B_FlocBaffle[last(B_FlocBaffle)]*N_FlocChannelBafflesLong[last(N_FlocChannelBafflesLong)]))
ArrayFlocModXLastNO := ArrayLast(1, N_FlocChannelModulesLong[last(N_FlocChannelModulesLong)], -(B_FlocBaffle[last(B_FlocBaffle)]*N_FlocChannelBafflesLong[last(N_FlocChannelBafflesLong)]))
FlocMod1CouplingFrz := FreezeLayer("FlocModCouplingPlu")  # must freeze this layer to ensure it gets grouped
FlocModCouplingsLast := stack(FlocMod1CouplingSelect, FlocModCouplingLastUpper, ArrayFlocModXLastNO, FlocModCouplingLastMiddle, ArrayFlocModXLastNO, FlocModCouplingLastLower, ArrayFlocModXLastNO, FlocMod1CouplingFrz)
FlocMod1PipeSelect := SelectLayer("FlocModPipePlu")
FlocModLongPipeLastUpper := PipeF([
    FittedCapLastNO_Origin[0] - B_FlocBaffle[last(B_FlocBaffle)];
    FittedCapLastNO_Origin[1];
    Floc_Origin[2] + H_Floc - 0.5*H_PlantFreeboard - S_Fitting - ConRadius(ND_FlocModulesLarge)
], L_FlocModuleLongOuter[last(L_FlocModuleLongOuter)], [0; 0]*deg, ND_FlocModulesMain, PS_Modules)
FlocModLongPipeLastMiddle := PipeF(FittedCapLastNO_Origin, L_FlocModuleLong[last(L_FlocModuleLong)], [0; 0]*deg, ND_FlocModulesMain, PS_Modules)
FlocModLongPipeLastLower := PipeF([
    FittedCapLastNO_Origin[0];
    FittedCapLastNO_Origin[1];
    Floc_Origin[2] + S_Fitting + L_BafflePort + ConRadius(ND_FlocModulesLarge)
], L_FlocModuleLongOuter[last(L_FlocModuleLongOuter)], [0; 0]*deg, ND_FlocModulesMain, PS_Modules)
EndFlocModLongPipeLastUpper := PipeF([
    {
        (Floc_Origin[0] - L_Sed + X_FlocBaffles[0, cols(X_FlocBaffles) - 1] - CapThickness(ND_FlocModulesMain) - T_FlocBaffle) if N_FlocChannelBafflesShort[N_FlocChannels - 1] == 2
        (Floc_Origin[0] - L_Sed + X_FlocBaffles[0, cols(X_FlocBaffles) - 1] + SocketDepth(ND_FlocModulesMain) - CouplingLength(ND_FlocModulesMain)) otherwise
    };
    FittedCapLastNO_Origin[1];
    Floc_Origin[2] + H_Floc - 0.5*H_PlantFreeboard - S_Fitting - ConRadius(ND_FlocModulesLarge)
], {
    (X_FlocBaffles[0, cols(X_FlocBaffles) - 1] - CapThickness(ND_FlocModulesMain) - T_FlocBaffle) if N_FlocChannelBafflesShort[N_FlocChannels - 1] == 2
    (X_FlocBaffles[0, cols(X_FlocBaffles) - 1] + SocketDepth(ND_FlocModulesMain) - CouplingLength(ND_FlocModulesMain) - T_FlocBaffle) otherwise
}, [0; 0]*deg, ND_FlocModulesMain, PS_Modules)
EndFlocModLongPipeLastMiddle := PipeF([
    Floc_Origin[0] - L_Sed + X_FlocBaffles[0, cols(X_FlocBaffles) - 1] - T_FlocBaffle + SocketDepth(ND_FlocModulesMain) - CouplingLength(ND_FlocModulesMain);
    FittedCapLastNO_Origin[1];
    FittedCapLastNO_Origin[2]
], X_FlocBaffles[0, cols(X_FlocBaffles) - 1] + SocketDepth(ND_FlocModulesMain) - CouplingLength(ND_FlocModulesMain) - T_FlocBaffle, [0; 0]*deg, ND_FlocModulesMain, PS_Modules)
EndFlocModLongPipeLastLower := PipeF([
    {
        (Floc_Origin[0] - L_Sed + X_FlocBaffles[1, cols(X_FlocBaffles) - 1] - CapThickness(ND_FlocModulesMain) - T_FlocBaffle) if N_FlocChannelBafflesShort[N_FlocChannels - 1] == 2
        (Floc_Origin[0] - L_Sed + X_FlocBaffles[1, cols(X_FlocBaffles) - 1] + SocketDepth(ND_FlocModulesMain) - CouplingLength(ND_FlocModulesMain) - T_FlocBaffle) otherwise
    };
    FittedCapLastNO_Origin[1];
    Floc_Origin[2] + S_Fitting + L_BafflePort + ConRadius(ND_FlocModulesLarge)
], {
    (X_FlocBaffles[1, cols(X_FlocBaffles) - 1] - CapThickness(ND_FlocModulesMain) - T_FlocBaffle) if N_FlocChannelBafflesShort[N_FlocChannels - 1] == 2
    (X_FlocBaffles[1, cols(X_FlocBaffles) - 1] + SocketDepth(ND_FlocModulesMain) - CouplingLength(ND_FlocModulesMain) - T_FlocBaffle) otherwise
}, [0; 0]*deg, ND_FlocModulesMain, PS_Modules)
FlocModLastShortPipeUpper := PipeF([
    {
        (Floc_Origin[0] - L_Sed + X_FlocBaffles[N_FlocChannelBafflesShort[N_FlocChannels - 1] - 2, cols(X_FlocBaffles) - 1] - CapThickness(ND_FlocModulesMain) - T_FlocBaffle) if N_FlocChannelBafflesShort[N_FlocChannels - 1] - 2 ≥ 0
        0 otherwise
    };
    FittedCapLastNO_Origin[1];
    Floc_Origin[2] + H_Floc - 0.5*H_PlantFreeboard - S_Fitting - ConRadius(ND_FlocModulesLarge)
], (N_FlocChannelBafflesShort[N_FlocChannels - 1] - 2)*B_FlocBaffle[last(S_FlocBaffle)] + (SocketDepth(ND_FlocModulesMain) - CapThickness(ND_FlocModulesMain)), [0; 0]*deg, ND_FlocModulesMain, PS_Modules)
FlocModLastShortPipeMiddle := PipeF([
    {
        (Floc_Origin[0] - L_Sed + X_FlocBaffles[N_FlocChannelBafflesShort[N_FlocChannels - 1] - 1, cols(X_FlocBaffles) - 1] - CapThickness(ND_FlocModulesMain) - T_FlocBaffle) if N_FlocChannelBafflesShort[N_FlocChannels - 1] - 1 ≥ 0
        0 otherwise
    };
    FittedCapLastNO_Origin[1];
    FittedCapLastNO_Origin[2]
], (N_FlocChannelBafflesShort[N_FlocChannels - 1] - 1)*B_FlocBaffle[last(S_FlocBaffle)] + SocketDepth(ND_FlocModulesMain) - CapThickness(ND_FlocModulesMain), [0; 0]*deg, ND_FlocModulesMain, PS_Modules)
FlocModLastShortPipeLower := PipeF([
    {
        (Floc_Origin[0] - L_Sed + X_FlocBaffles[N_FlocChannelBafflesShort[N_FlocChannels - 1] - 1, cols(X_FlocBaffles) - 1] - CapThickness(ND_FlocModulesMain) - T_FlocBaffle) if N_FlocChannelBafflesShort[N_FlocChannels - 1] - 1 ≥ 0
        0 otherwise
    };
    FittedCapLastNO_Origin[1];
    Floc_Origin[2] + S_Fitting + L_BafflePort + ConRadius(ND_FlocModulesLarge)
], (N_FlocChannelBafflesShort[N_FlocChannels - 1] - 1)*B_FlocBaffle[last(S_FlocBaffle)] + (SocketDepth(ND_FlocModulesMain) - CapThickness(ND_FlocModulesMain)), [0; 0]*deg, ND_FlocModulesMain, PS_Modules)
# FlocMod1LongPipeFrz
FlocModLastEndPipes :=
    stack(FlocMod1PipeSelect, FlocModLongPipeLastUpper, ArrayFlocModXLastNO, FlocModLongPipeLastMiddle, ArrayFlocModXLastNO, FlocModLongPipeLastLower, ArrayFlocModXLastNO, EndFlocModLongPipeLastUpper, EndFlocModLongPipeLastMiddle, EndFlocModLongPipeLastLower, FlocMod1PipeFrz) if N_FlocChannelBafflesShort[N_FlocChannels - 1] == 0
    stack(FlocMod1PipeSelect, FlocModLongPipeLastUpper, ArrayFlocModXLastNO, FlocModLongPipeLastMiddle, ArrayFlocModXLastNO, FlocModLongPipeLastLower, ArrayFlocModXLastNO, EndFlocModLongPipeLastUpper, EndFlocModLongPipeLastMiddle, EndFlocModLongPipeLastLower, FlocModLastShortPipeMiddle, FlocMod1PipeFrz) if N_FlocChannelBafflesShort[N_FlocChannels - 1] == 2
    stack(FlocMod1PipeSelect, FlocModLongPipeLastUpper, ArrayFlocModXLastNO, FlocModLongPipeLastMiddle, ArrayFlocModXLastNO, FlocModLongPipeLastLower, ArrayFlocModXLastNO, EndFlocModLongPipeLastUpper, EndFlocModLongPipeLastMiddle, EndFlocModLongPipeLastLower, FlocModLastShortPipeUpper, FlocModLastShortPipeMiddle, FlocModLastShortPipeLower, FlocMod1PipeFrz) otherwise
FlocModConnectPipeSelect := SelectLayer("FlocModConnectPipePlu")
FlocModConnectorPipeLastUpper := PipeF([
    ConnectorPipeLastNO_Origin[0];
    ConnectorPipeLastNO_Origin[1];
    Floc_Origin[2] + H_Floc - 0.5*H_PlantFreeboard - S_Fitting - ConRadius(ND_FlocModulesLarge)
], L_FlocModuleConnectorOuter[last(L_FlocModuleConnectorOuter)], [0; 0]*deg, ND_FlocModulesMain, PS_Modules)
FlocModConnectorPipeLastMiddle := PipeF(ConnectorPipeLastNO_Origin, L_FlocModuleConnector[last(L_FlocModuleConnector)], [0; 0]*deg, ND_FlocModulesMain, PS_Modules)
FlocModConnectorPipeLastLower := PipeF([
    ConnectorPipeLastNO_Origin[0] + B_FlocBaffle[last(B_FlocBaffle)];
    ConnectorPipeLastNO_Origin[1];
    Floc_Origin[2] + S_Fitting + L_BafflePort + ConRadius(ND_FlocModulesLarge)
], L_FlocModuleConnectorOuter[last(L_FlocModuleConnectorOuter)], [0; 0]*deg, ND_FlocModulesMain, PS_Modules)
# FlocModConnectPipeFrz
LastFlocModShortPipe :=
    if N_FlocChannelBafflesShort[last(N_FlocChannelBafflesShort)] ≠ 0
        PipeF([
            (Plant_Origin[0] - X_FlocBaffles[N_FlocChannelBafflesLong[last(N_FlocChannelBafflesLong)]*N_FlocChannelModulesLong[last(N_FlocChannelModulesLong)], N_FlocChannels - 1]) - CapThickness(ND_FlocModulesMain) - T_FlocBaffle;
            ConnectorPipeLastNO_Origin[1];
            ConnectorPipeLastNO_Origin[2]
        ], L_FlocModuleShort[last(L_FlocModuleShort)], [0; 0]*deg, ND_FlocModulesMain, PS_Modules)
    "0" otherwise
FlocModEndPipeLast := PipeF([
    Floc_Origin[0] - X_FlocBaffles[N_FlocChannelBaffles[last(N_FlocChannelBaffles)] - 1, N_FlocChannels - 1] - T_FlocBaffle - CouplingLength(ND_FlocModulesMain) + SocketDepth(ND_FlocModulesMain);
    FittedCapLastNO_Origin[1];
    FittedCapLastNO_Origin[1]
], L_Sed - X_FlocBaffles[N_FlocChannelBaffles[last(N_FlocChannelBaffles)] - 1, N_FlocChannels - 1] - CouplingLength(ND_FlocModulesMain) + SocketDepth(ND_FlocModulesMain) - T_FlocBaffle, [0; 0]*deg, ND_FlocModulesMain, PS_Modules)
# FlocModPipeFrz
FlocModSpacerPipeLastMiddle :=
    Local ← stack(SelectLayer("FlocModSpacerPlu"), PipeF([
        CapThickness(ND_FlocModulesMain) - CapHeight(ND_FlocModulesMain) + FittedCapLastNO_Origin[0];
        FittedCapLastNO_Origin[1];
        ConnectorPipeLastNO_Origin[2]
    ], S_FlocBaffle[N_FlocChannels - 1] - CapHeight(ND_FlocModulesMain), [0; 0]*deg, ND_SpacerPipe, PS_Modules), ArrayFlocModXLastNO)
    for i ∈ 0 .. N_FlocChannelBafflesLong[N_FlocChannels - 1] - 3
        Local ← stack(Local, PipeF([
            CapThickness(ND_FlocModulesMain) - B_FlocBaffle[N_FlocChannels - 1]*(i + 1) + FittedCapLastNO_Origin[0];
            FittedCapLastNO_Origin[1];
            ConnectorPipeLastNO_Origin[2]
        ], S_FlocBaffle[N_FlocChannels - 1], [0; 0]*deg, ND_SpacerPipe, PS_Modules), ArrayFlocModXLastNO)
    Local
FlocModSpacerUpperLast :=
    Local ← stack(PipeF([
        Plant_Origin[0] + X_FlocBaffles[N_FlocChannelBaffles[last(N_FlocChannelBaffles)] - 2, N_FlocChannels - 1] - L_Sed - CapHeight(ND_FlocModulesMain) - T_FlocBaffle;
        FittedCapLastNO_Origin[1];
        Floc_Origin[2] + H_Floc - 0.5*H_PlantFreeboard - S_Fitting - ConRadius(ND_FlocModulesLarge)
    ], 2*S_FlocBaffle[0] - CapHeight(ND_FlocModulesMain) + T_FlocBaffle, [0; 0]*deg, ND_SpacerPipe, PS_Modules), ArrayFlocModXLastNO)
    if N_FlocChannelBafflesLong[N_FlocChannels - 1] > 5
        for i ∈ 1 .. N_FlocChannelBafflesLong[N_FlocChannels - 1]/2 - 2
            Local ← stack(Local, PipeF([
                Plant_Origin[0] + X_FlocBaffles[N_FlocChannelBaffles[last(N_FlocChannelBaffles)] - 2, N_FlocChannels - 1] - T_FlocBaffle - L_Sed - 2*B_FlocBaffle[last(B_FlocBaffle)]*i;
                FittedCapLastNO_Origin[1];
                Floc_Origin[2] + H_Floc - 0.5*H_PlantFreeboard - S_Fitting - ConRadius(ND_FlocModulesLarge)
            ], 2*S_FlocBaffle[0] + T_FlocBaffle, [0; 0]*deg, ND_SpacerPipe, PS_Modules), ArrayFlocModXLastNO)
    Local
FlocModSpacerLowerLast :=
    Local ← stack(PipeF([
        Plant_Origin[0] - T_FlocBaffle + X_FlocBaffles[N_FlocChannelBaffles[last(N_FlocChannelBaffles)] - 1, N_FlocChannels - 1] - L_Sed - CapHeight(ND_FlocModulesMain);
        FittedCapLastNO_Origin[1];
        Floc_Origin[2] + S_Fitting + L_BafflePort + ConRadius(ND_FlocModulesLarge)
    ], 2*S_FlocBaffle[0] - CapHeight(ND_FlocModulesMain) + T_FlocBaffle, [0; 0]*deg, ND_SpacerPipe, PS_Modules), ArrayFlocModXLastNO)
    if N_FlocChannelBafflesLong[N_FlocChannels - 1] > 5
        for i ∈ 1 .. N_FlocChannelBafflesLong[N_FlocChannels - 1]/2 - 2
            Local ← stack(Local, PipeF([
                Plant_Origin[0] + X_FlocBaffles[N_FlocChannelBaffles[last(N_FlocChannelBaffles)] - 1, N_FlocChannels - 1] - L_Sed - 2*i*B_FlocBaffle[last(B_FlocBaffle)];
                FittedCapLastNO_Origin[1];
                Floc_Origin[2] + S_Fitting + L_BafflePort + ConRadius(ND_FlocModulesLarge)
            ], 2*S_FlocBaffle[0] + T_FlocBaffle, [0; 0]*deg, ND_SpacerPipe, PS_Modules), ArrayFlocModXLastNO)
    Local
FlocModSpacerPipeLastShortMiddle1 :=
    if N_FlocChannelBafflesShort[last(N_FlocChannelBafflesShort)] ≠ 0
        PipeF([
            Plant_Origin[0] - T_FlocBaffle - L_Sed + X_FlocBaffles[N_FlocChannelBafflesShort[last(N_FlocChannelBafflesShort)] - 1, N_FlocChannels - 1] - CapHeight(ND_FlocModulesMain);
            FittedCapLastNO_Origin[1];
            ConnectorPipeLastNO_Origin[2]
        ], S_FlocBaffle[N_FlocChannels - 1] - CapHeight(ND_FlocModulesMain), [0; 0]*deg, ND_SpacerPipe, PS_Modules)
    "0" otherwise
FlocModSpacerPipeLastShortMiddle2 :=
    if N_FlocChannelBafflesShort[last(N_FlocChannelBafflesShort)] ≥ 2
        PipeF([
            Plant_Origin[0] - T_FlocBaffle - L_Sed + X_FlocBaffles[N_FlocChannelBafflesShort[last(N_FlocChannelBafflesShort)] - 2, N_FlocChannels - 1] - CapHeight(ND_FlocModulesMain);
            FittedCapLastNO_Origin[1];
            ConnectorPipeLastNO_Origin[2]
        ], S_FlocBaffle[N_FlocChannels - 1], [0; 0]*deg, ND_SpacerPipe, PS_Modules)
    "0" otherwise
ArrayModSpacerShortLast := ArrayLast(1, N_FlocChannelBafflesShort[last(N_FlocChannelBafflesShort)] - 2, -B_FlocBaffle[last(B_FlocBaffle)])
FlocModSpacerPipeLastShortUpper1 :=
    if N_FlocChannelBafflesShort[last(N_FlocChannelBafflesShort)] ≥ 2
        PipeF([
            Plant_Origin[0] - T_FlocBaffle - L_Sed + X_FlocBaffles[N_FlocChannelBafflesShort[last(N_FlocChannelBafflesShort)] - 2, N_FlocChannels - 1] - CapHeight(ND_FlocModulesMain);
            FittedCapLastNO_Origin[1];
            ConnectorPipeLastNO_Origin[2]
        ], S_FlocBaffle[N_FlocChannels - 1] - CapHeight(ND_FlocModulesMain), [0; 0]*deg, ND_SpacerPipe, PS_Modules)
    "0" otherwise
FlocModSpacerPipeLastShortUpper2 :=
    if N_FlocChannelBafflesShort[last(N_FlocChannelBafflesShort)] ≥ 3
        PipeF([
            Plant_Origin[0] - T_FlocBaffle - L_Sed + X_FlocBaffles[N_FlocChannelBafflesShort[last(N_FlocChannelBafflesShort)] - 3, N_FlocChannels - 1] - CapHeight(ND_FlocModulesMain);
            FittedCapLastNO_Origin[1];
            ConnectorPipeLastNO_Origin[2]
        ], S_FlocBaffle[N_FlocChannels - 1], [0; 0]*deg, ND_SpacerPipe, PS_Modules)
    "0" otherwise
FlocModSpacerPipeLastShortLower1 :=
    if N_FlocChannelBafflesShort[last(N_FlocChannelBafflesShort)] ≠ 0
        PipeF([
            Plant_Origin[0] - T_FlocBaffle - L_Sed + X_FlocBaffles[N_FlocChannelBafflesShort[last(N_FlocChannelBafflesShort)] - 1, N_FlocChannels - 1] - CapHeight(ND_FlocModulesMain);
            FittedCapLastNO_Origin[1];
            ConnectorPipeLastNO_Origin[2]
        ], S_FlocBaffle[N_FlocChannels - 1] - CapHeight(ND_FlocModulesMain), [0; 0]*deg, ND_SpacerPipe, PS_Modules)
    "0" otherwise
FlocModSpacerPipeLastShortLower2 :=
    if N_FlocChannelBafflesShort[last(N_FlocChannelBafflesShort)] ≥ 2
        PipeF([
            Plant_Origin[0] - T_FlocBaffle - L_Sed + X_FlocBaffles[N_FlocChannelBafflesShort[last(N_FlocChannelBafflesShort)] - 2, N_FlocChannels - 1] - CapHeight(ND_FlocModulesMain);
            FittedCapLastNO_Origin[1];
            ConnectorPipeLastNO_Origin[2]
        ], S_FlocBaffle[N_FlocChannels - 1], [0; 0]*deg, ND_SpacerPipe, PS_Modules)
    "0" otherwise
ArrayModSpacerShortLastOuter := ArrayLast(1, (N_FlocChannelBafflesShort[last(N_FlocChannelBafflesShort)] - 2)/2, -2*B_FlocBaffle[last(B_FlocBaffle)])
FlocMod1SpacerNOLast :=
    stack(FlocModSpacerPipeLastMiddle, FlocModSpacerUpperLast, FlocModSpacerLowerLast, FlocMod1SpacerFrz) if N_FlocChannelBafflesShort[last(N_FlocChannelBafflesShort)] == 0
    stack(FlocModSpacerPipeLastMiddle, FlocModSpacerUpperLast, FlocModSpacerLowerLast, FlocModSpacerPipeLastShortMiddle1, FlocMod1SpacerFrz) if N_FlocChannelBafflesShort[last(N_FlocChannelBafflesShort)] == 2
    stack(FlocModSpacerPipeLastMiddle, FlocModSpacerUpperLast, FlocModSpacerLowerLast, FlocModSpacerPipeLastShortMiddle1, FlocModSpacerPipeLastShortMiddle2, ArrayModSpacerShortLast, FlocMod1SpacerFrz) if N_FlocChannelBafflesShort[last(N_FlocChannelBafflesShort)] == 4
    stack(FlocModSpacerPipeLastMiddle, FlocModSpacerUpperLast, FlocModSpacerLowerLast, FlocModSpacerPipeLastShortMiddle1, FlocModSpacerPipeLastShortMiddle2, ArrayModSpacerShortLast, FlocModSpacerPipeLastShortUpper1, FlocModSpacerPipeLastShortLower1, FlocMod1SpacerFrz) if N_FlocChannelBafflesShort[last(N_FlocChannelBafflesShort)] == 6
    stack(FlocModSpacerPipeLastMiddle, FlocModSpacerUpperLast, FlocModSpacerLowerLast, FlocModSpacerPipeLastShortMiddle1, FlocModSpacerPipeLastShortMiddle2, ArrayModSpacerShortLast, FlocModSpacerPipeLastShortUpper1, ArrayModSpacerShortLastOuter, FlocModSpacerPipeLastShortLower1, ArrayModSpacerShortLastOuter, FlocMod1SpacerFrz) otherwise
# SelectFlocModCoupling
FlocModCouplingLastEndUpper := CouplingF([
    Floc_Origin[0] - L_Sed + X_FlocBaffles[0, N_FlocChannels - 1] - SocketDepth(ND_FlocModulesMain) - T_FlocBaffle;
    FittedCapLastNO_Origin[1];
    Floc_Origin[2] + H_Floc - 0.5*H_PlantFreeboard - S_Fitting - ConRadius(ND_FlocModulesLarge)
], [0; 0]*deg, ND_FlocModulesMain, PS_Modules)
FlocModCouplingLastEndMiddle := CouplingF([
    Floc_Origin[0] - L_Sed + X_FlocBaffles[0, N_FlocChannels - 1] - SocketDepth(ND_FlocModulesMain) - T_FlocBaffle;
    FittedCapLastNO_Origin[1];
    ConnectorPipeLastNO_Origin[2]
], [0; 0]*deg, ND_FlocModulesMain, PS_Modules)
FlocModCouplingLastEndLower := CouplingF([
    Floc_Origin[0] - L_Sed + X_FlocBaffles[1, N_FlocChannels - 1] - SocketDepth(ND_FlocModulesMain) - T_FlocBaffle;
    FittedCapLastNO_Origin[1];
    Floc_Origin[2] + S_Fitting + L_BafflePort + ConRadius(ND_FlocModulesLarge)
], [0; 0]*deg, ND_FlocModulesMain, PS_Modules)
# FlocModCouplingFrz
EndLastModCouplings :=
    stack(SelectFlocMod1Coupling, FlocModCouplingLastEndMiddle, FlocMod1CouplingFrz) if N_FlocChannelBafflesShort[last(N_FlocChannelBafflesShort)] == 2
    stack(SelectFlocMod1Coupling, FlocModCouplingLastEndUpper, FlocModCouplingLastEndMiddle, FlocModCouplingLastEndLower, FlocMod1CouplingFrz) otherwise
FlocModSpacerShortLast :=
    stack(SelectFlocMod1Spacer, FlocModSpacerPipeLastShort1, FlocMod1SpacerFrz) if N_FlocChannelBafflesShort[last(N_FlocChannelBafflesShort)] == 2
    stack(SelectFlocMod1Spacer, FlocModSpacerPipeLastShort1, FlocModSpacerPipeLastShort2, ArrayModSpacerShortLast, FlocMod1SpacerFrz) otherwise
FlocModLastNO :=
    stack(SelectFlocMod1PipeCap, FlocModLargeCapLastUpper, ArrayFlocModXCapL, FlocModLargeCapLastMiddle, ArrayFlocModXCapL, FlocModLargeCapLastLower, ArrayFlocModXCapL, FlocModFittedCapLastUpper, ArrayFlocModXCapL, FlocModFittedCapLastMiddle, ArrayFlocModXCapL, FlocModFittedCapLastLower, ArrayFlocModXCapL, FlocMod1CapFrz, FlocMod1SpacerNOLast, FlocModCouplingsLast, FlocModLastEndPipes, FlocModConnectPipeSelect, FlocModConnectorPipeLastUpper, ArrayFlocModXConnectL, FlocModConnectorPipeLastMiddle, ArrayFlocModXConnectL, FlocModConnectorPipeLastLower, ArrayFlocModXConnectL, FlocModConnectPipeFrz) if N_FlocChannelBafflesShort[last(N_FlocChannelBafflesShort)] == 0
    stack(SelectFlocMod1PipeCap, FlocModLargeCapLastUpper, ArrayFlocModXCapL, FlocModLargeCapLastMiddle, ArrayFlocModXCapL, FlocModLargeCapLastLower, ArrayFlocModXCapL, FlocModFittedCapLastUpper, ArrayFlocModXCapL, FlocModFittedCapLastMiddle, ArrayFlocModXCapL, FlocModFittedCapLastLower, ArrayFlocModXCapL, FlocMod1CapFrz, FlocMod1SpacerNOLast, FlocModCouplingsLast, FlocModLastEndPipes, FlocModConnectPipeSelect, FlocModConnectorPipeLastUpper, ArrayFlocModXLastNO, FlocModConnectorPipeLastMiddle, ArrayFlocModXLastNO, FlocModConnectorPipeLastLower, ArrayFlocModXLastNO, FlocModConnectPipeFrz, EndLastModCouplings) otherwise
ThawAllFlocModules := ThawMultiple(["FlocMod*Plu"])
# ArrayModulesY array new pipes to within 0.05m of each wall.
# ArrayFlocModY
FlocModulesNonOverlapping :=
    FlocMod1NoOverlap if Q_Plant ≤ Q_PlantMaxLF
    stack(FlocMod1NoOverlap, FlocModLastNO, ThawAllFlocModules, ArrayFlocModY, FrzFlocModComponents)
# Horizontal Baffles
FlocBaffleLayerH := layer_new("FlocModBaffles", ltpurple)
FreezeFlocBafflesH := FreezeLayer("FlocModBaffles")
FlocTankBaffleScriptH :=
    Local ← "null" if EN_FlocHoriz ≠ 1
    otherwise
        Local ← FlocBaffleLayerH
        for i ∈ 0 .. (N_FlocChannels - 1)
            for j ∈ 0 .. 1
                Local ← stack(Local, BoxF([Floc_Origin[0] - L_Sed; -L_Slot; Floc_Origin[2]] + [X_FlocBaffles[j, i]; Y_FlocBaffles[j, i]; Z_FlocBaffles[j, i]], [Floc_Origin[0] - L_Sed; -L_Slot; Floc_Origin[2]] + [X_FlocBaffles[j, i]; Y_FlocBaffles[j, i]; Z_FlocBaffles[j, i]] + [T_FlocBaffle; L_FlocBaffles[j, i]; H_Floc], [0; 0; 0]*deg))
                Local ← stack(Local, ArrayLast(1, N_FlocChannelBaffles[i]/2, 2*B_FlocBaffle[i]))
    Local ← stack(Local, FreezeFlocBafflesH)
    return Local
# Channel Drains
# Rapid Mix Components
FlocRMLayer := layer_new("FlocRMCouplingPlu", green)
DrawFlocRMCoupling := CouplingSUBF(FlocCoupling_Origin, [270; 0]*deg, ND_RMPipe, PS_Default, ["FlocTankCon"])  # FlocModPipeFrz
FreezeFlocRMCoupling := FreezeLayer("FlocRMCouplingPlu")
# Orifice Plate
LayerRMOrificePlate := layer_new("FlocRmOrificePlate", red)
D_RMOrifice := D_PipeED(E_MaxRM, Q_Plant, Pi_VenaContractaOrifice, Pi_JetRound)
RMOrificePlate := CylinderF([
    FlocCoupling_Origin[0];
    Floc_Origin[1] + N_FlocChannels*W_FlocChannel + (N_FlocChannels - 1)*T_FlocChannelWall - L_FlocCouplingExt + SocketDepth(ND_RMPipe);
    FlocCoupling_Origin[2]
], outerradius(ND_RMPipe), T_RMOrificePlate, [90; 0; 0]*deg)
FreezeRMOrificePlate := FreezeLayer("FlocRmOrificePlate")
RMOrifice := CylinderF([
    FlocCoupling_Origin[0];
    Floc_Origin[1] + N_FlocChannels*W_FlocChannel + (N_FlocChannels - 1)*T_FlocChannelWall - L_FlocCouplingExt + SocketDepth(ND_RMPipe);
    FlocCoupling_Origin[2]
], D_RMOrifice/2, T_RMOrificePlate, [90; 0; 0]*deg)
SubtractRMOrifice := SubtractF(["FlocRmOrificePlate"], "DeleteMe")
RMOrificePlateScript := stack(LayerRMOrificePlate, RMOrificePlate, FreezeRMOrificePlate, RMOrifice, GroupDelete, SubtractRMOrifice)
FlocRMPlateHolderLayer := layer_new("FlocRmPlateHolder", red)
RMOrificePlateHolderStub := PipeF([
    FlocCoupling_Origin[0];
    Floc_Origin[1] + N_FlocChannels*W_FlocChannel + (N_FlocChannels - 1)*T_FlocChannelWall - L_FlocCouplingExt + SocketDepth(ND_RMPipe) - T_RMOrificePlate;
    FlocCoupling_Origin[2]
], SocketDepth(ND_RMPipe), [90; 0; 0]*deg, ND_RMPipe, PS_Default)
FlocRmPlateHolderFrz := FreezeLayer("FlocRmPlateHolder")
# Orifice Plate Rod
D_RMOrificePlateRod := 3/8*in
OrificePlateRodLayer := layer_new("FlocOrificePlateRod", black)
OrificePlateRod := CylinderF([
    FlocCoupling_Origin[0];
    Floc_Origin[1] + N_FlocChannels*W_FlocChannel + (N_FlocChannels - 1)*T_FlocChannelWall - L_FlocCouplingExt/2;
    FlocCoupling_Origin[2] + ConRadius(ND_RMPipe) + zc
], D_RMOrificePlateRod, OuterDiameterFittingPVC(ND_RMPipe) + 2*zc, [0; 270; 0]*deg)
FreezeOrificePlateRod := FreezeLayer("FlocOrificePlateRod")
SubtractOrificePlateRodCoupling := SubtractF(["FlocRMCouplingPlu"], "DeleteMe")
SubtractOrificePlateRodPipe := SubtractF(["FlocRmPlateHolder"], "DeleteMe")
OrificePlateRodScript := stack(OrificePlateRod, GroupDelete, SubtractOrificePlateRodCoupling, OrificePlateRod, GroupDelete, SubtractOrificePlateRodPipe, OrificePlateRodLayer, OrificePlateRod, FreezeOrificePlateRod)
FlocRMScript := stack(FlocRMLayer, DrawFlocRMCoupling, FreezeFlocRMCoupling, RMOrificePlateScript, FlocRMPlateHolderLayer, RMOrificePlateHolderStub, FlocRmPlateHolderFrz, OrificePlateRodScript)
W_TrainWalkway := 1.5 m
ThawAll := ThawMultiple(["Floc*Con"])
MirrorFlocTank := Mirror3dAll("yz", [Floc_Origin[0] - L_Floc - W_PlantDC/2 - T_PlantWall; 0 m], "n")
FreezeAll := FreezeMultiple(["Floc*Con"])
AC_FlocTank :=
    stack(FlocTankScript, FlocTankBaffleScriptH, FlocTankDrainCouplingScript, FlocTankDrainPipeScript, FlocTankDrainAdapterScript, FlocTankDrainValveScript, FlocRMScript) if EN_FlocHoriz == 1 and N_FlocChannels ≤ 2
    stack(FlocTankScript, FlocTankBaffleScriptH, FlocTankDrainCouplingScript, FlocTankDrainPipeScript, FlocTankDrainAdapterScript, FlocTankDrainValveScript, FlocDrainArray, FlocRMScript) if EN_FlocHoriz == 1 and N_FlocChannels > 2
    stack(FlocTankScript, FlocTankBaffleScriptV, FlocModules, FlocTankDrainCouplingScript, FlocTankDrainPipeScript, FlocTankDrainAdapterScript, FlocTankDrainValveScript, FlocRMScript) if EN_FlocHoriz == 0 and N_FlocChannels ≤ 2
    stack(FlocTankScript, FlocTankBaffleScriptV, FlocModules, FlocTankDrainCouplingScript, FlocTankDrainPipeScript, FlocTankDrainAdapterScript, FlocTankDrainValveScript, FlocDrainArray) if EN_LfomPipe == 0 and EN_DoubleTrain == 0
    stack(FlocTankScript, FlocTankBaffleScriptV, FlocModules, FlocTankDrainCouplingScript, FlocTankDrainPipeScript, FlocTankDrainAdapterScript, FlocTankDrainValveScript, FlocDrainArray, ThawAll, MirrorFlocTank, FreezeAll) if EN_LfomPipe == 0 and EN_DoubleTrain == 1
    stack(FlocTankScript, FlocTankBaffleScriptV, FlocModules, FlocTankDrainCouplingScript, FlocTankDrainPipeScript, FlocTankDrainAdapterScript, FlocTankDrainValveScript, FlocDrainArray, FlocRMScript) otherwise
