Q_Plant := 4*L/s
# [reference: ExpertInputs.xmcd]
# [reference: MathFunctions.xmcd]
# [reference: PipeDatabase.xmcd]
# [reference: MaterialsDatabase.xmcd]
# [reference: FluidsFunctions.xmcd]
# [reference: CdcFunctions.xmcd]
# [reference: SedTankFunctions.xmcd]
# [reference: SedimentationTank.xmcd]
# [reference: LFOM.xmcd]
# [reference: EntranceTankFlocculatorLow2 abh35.xmcd]
# [reference: LFStackedRapidSandFilter_jsc377.xmcd]
# [reference: LinearCdc.xmcd]
# [reference: ChemStorageTanksLow abh35.xmcd]
# AutoCAD drawing programs:
# Translators:
# These are the codes that take MathCAD outputs and create AutoCAD scripts that are used to draw the plant (formerly Basics)
# [reference: MtoATranslators.xmcd]
# The wrapped MtoA translator contains the functions that the user will want to access. These functions will draw pieces with full functionality - specifying the location, dimension, and orientation of the object. Also, it contains layer control and subtraction capabilities for grouped objects.
# [reference: MtoATranslatorsWrapped.xmcd]
# Drawing functions:
# [reference: ChannelF.xmcd]
# [reference: PlumbingF.xmcd]
# [reference: TankF.xmcd]
# [reference: StairsF.xmcd]
# [reference: DrainChannelF.xmcd]
# AutoCAD Script Files:
# [reference: SedimentationTankACLow.xmcd]
# Flocculator Drawing Low Flow (Single Channel)
# Layers
FlocConLayer := layer_new("FlocTankCon", grey)
FlocConFrz := FreezeLayer("FlocTankCon")
FlocDrainPipeLayer := layer_new("FlocDrainPipePlu", blue)
FlocDrainPipeFrz := FreezeLayer("FlocDrainPipePlu")
FlocDrainFittingLayer := layer_new("FlocDrainFittingPlu", green)
FlocDrainFittingFrz := FreezeLayer("FlocDrainFittingPlu")
FlocDrainRemovableLayer := layer_new("FlocDrainRemovablePlu", red)
FlocDrainRemovableFrz := FreezeLayer("FlocDrainRemovablePlu")
FlocBaffleLayer := layer_new("FlocModBaffles", ltpurple)
FlocBaffleFrz := FreezeLayer("FlocModBaffles")
FlocModPipeLayer := layer_new("FlocModPipePlu", blue)
FlocModPipeFrz := FreezeLayer("FlocModPipePlu")
FlocModSpacerLayer := layer_new("FlocModSpacerPlu", blue3)
FlocModSpacerFrz := FreezeLayer("FlocModSpacerPlu")
FlocModFittingLayer := layer_new("FlocModFittingPlu", green)
FlocModFittingFrz := FreezeLayer("FlocModFittingPlu")
# Flocculator Masonry
Floc_Dim := [L_Floc; W_Floc; H_Floc]
Floc_Origin := Plant_Origin + [-L_Et - T_PlantWall; W_Sed + T_PlantWall; Z_FlocBottom]
FlocTank := Tank(Floc_Origin, Floc_Dim, T_PlantWall)
FlocEtWall := BoxF(Floc_Origin + [0 m; -T_PlantWall; -T_PlantWall], Floc_Origin + [T_PlantWall; W_Floc + T_PlantWall; H_Floc], [0; 0; 0]*deg)
SubtractFromFlocCon := SubtractF(["FlocTankCon"], "DeleteMe")
FlocConScript := stack(FlocConLayer, FlocTank, FlocConFrz, FlocEtWall, GroupDelete, SubtractFromFlocCon)
# Baffles
# Baffle origins and dimensions
FlocBaffleLow_Origin := Floc_Origin + [-S_FlocBaffle; 0 m; 0 m]
FlocBaffleLow_Dim := [-T_SedPlate; W_Floc; Z_FlocLowBaffleTop - FlocBaffleLow_Origin[2]]
FlocBaffleHigh_Origin := Floc_Origin + [-2*S_FlocBaffle - T_SedPlate; 0 m; S_FlocBaffle]
FlocBaffleHigh_Dim := [-T_SedPlate; W_Floc; Z_FlocTop - FlocBaffleHigh_Origin[2]]
# Obstacle origins and dimensions
FlocObstacleUp1_Origin := FlocBaffleHigh_Origin + [-B_FlocBaffle; 0 m; S_FlocObstacle + L_FlocObstacleUp*cos(AN_FlocObs)]
FlocObstacleUp1_Dim := [-L_FlocObstacleUp; W_Floc; -T_SedPlate]
FlocObstacleUp2_Origin := FlocBaffleHigh_Origin + [-T_SedPlate; 0 m; 2*S_FlocObstacle + L_FlocObstacleUp*cos(AN_FlocObs)]
FlocObstacleUp2_Dim := [L_FlocObstacleUp; W_Floc; -T_SedPlate]
FlocObstacleDown1_Origin := [
    FlocBaffleLow_Origin[0] - B_FlocBaffle;
    FlocBaffleLow_Origin[1];
    Z_FlocLowBaffleTop - S_FlocObstacle + L_FlocObstacleDown*cos(AN_FlocObs)
]
FlocObstacleDown1_Dim := [L_FlocObstacleDown; W_Floc; -T_SedPlate]
FlocObstacleDown2_Origin := [
    FlocBaffleLow_Origin[0] - T_SedPlate;
    FlocBaffleLow_Origin[1];
    Z_FlocLowBaffleTop - 2*S_FlocObstacle + L_FlocObstacleDown*cos(AN_FlocObs)
]
FlocObstacleDown2_Dim := [-L_FlocObstacleDown; W_Floc; -T_SedPlate]
# Draw and array baffles
FlocBaffleLow := BoxF(FlocBaffleLow_Origin, FlocBaffleLow_Origin + FlocBaffleLow_Dim, [0; 0; 0]*deg)
ArrayLowBaffle := ArrayLast((N_FlocBaffles + 1)/2, 1, -B_FlocBaffle)
FlocBaffleHigh := BoxF(FlocBaffleHigh_Origin, FlocBaffleHigh_Origin + FlocBaffleHigh_Dim, [0; 0; 0]*deg)
ArrayHighBaffle := ArrayLast((N_FlocBaffles - 1)/2, 1, -B_FlocBaffle)
FlocBaffleScript := stack(FlocBaffleLayer, FlocBaffleLow, ArrayLowBaffle, FlocBaffleHigh, ArrayHighBaffle)
# Draw and array obstacles
FlocObstacleUp1 := BoxF(FlocObstacleUp1_Origin, FlocObstacleUp1_Dim, [0; AN_FlocObs; 0]*deg)
ArrayFlocObsX := ArrayLast((N_FlocBaffles - 1)/2, 1, -2*B_FlocBaffle)
ArrayFlocObsUp1Z := ArrayLast(1, ceil(N_FlocObstaclesPerSpace/2), S_FlocObstacle)
FlocObstacleUp2 := BoxF(FlocObstacleUp2_Origin, FlocObstacleUp2_Dim, [0; -AN_FlocObs; 0]*deg)
ArrayFlocObsUp2Z := ArrayLast(1, floor(N_FlocObstaclesPerSpace/2), S_FlocObstacle)
FlocObstacleDown1 := BoxF(FlocObstacleDown1_Origin, FlocObstacleDown1_Dim, [0; AN_FlocObs; 0]*deg)
ArrayFlocObsDown1Z := ArrayLast(1, ceil(N_FlocObstaclesPerSpace/2), -S_FlocObstacle)
FlocObstacleDown2 := BoxF(FlocObstacleDown2_Origin, FlocObstacleDown2_Dim, [0; -AN_FlocObs; 0]*deg)
ArrayFlocObsDown2Z := ArrayLast(1, floor(N_FlocObstaclesPerSpace/2), -S_FlocObstacle)
FlocObstacleScript := stack(FlocObstacleUp1, view("f"), ArrayFlocObsX, ArrayFlocObsUp1Z, view("t"), FlocObstacleUp2, view("f"), ArrayFlocObsX, ArrayFlocObsUp2Z, view("t"), FlocObstacleDown1, view("f"), ArrayFlocObsX, ArrayFlocObsDown1Z, view("t"), FlocObstacleDown2, view("f"), ArrayFlocObsX, ArrayFlocObsUp1Z, view("t"))
FlocLaminaScript := stack(FlocBaffleScript, FlocObstacleScript, FlocBaffleFrz)
# Channel Drain
FlocDrainCoupling_Origin := Floc_Origin + [-L_Floc + S_Fitting + ConRadius(ND_FlocDrain); W_Floc/2; -SocketDepth(ND_FlocDrain)]
FlocDrainVertNipple_Origin := FlocDrainCoupling_Origin + [0 m; 0 m; -CouplingLength(ND_FlocDrain) + 2*SocketDepth(ND_FlocDrain)]
FlocDrainElbow_Origin := FlocDrainCoupling_Origin + [
    0 m;
    0 m;
    SocketDepth(ND_FlocDrain) - T_FlocSlab - ConRadius(ND_FlocDrain) + ElbowRadius(ND_FlocDrain)
]
FlocDrainHorizNipple_Origin := FlocDrainElbow_Origin + [-ElbowRadius(ND_FlocDrain); 0 m; -ElbowRadius(ND_FlocDrain)]
FlocDrainCoupling := CouplingSUBF(FlocDrainCoupling_Origin, [0; -90]*deg, ND_FlocDrain, PS_Default, ["FlocTankCon"])
FlocDrainVertNipple := PipeSUBF(FlocDrainVertNipple_Origin, FlocDrainVertNipple_Origin[2] - FlocDrainElbow_Origin[2], [0; -90]*deg, ND_FlocDrain, PS_Default, ["FlocTankCon"])
FlocDrainElbow := ElbowSUBF(FlocDrainElbow_Origin, [0; 0; -90]*deg, ND_FlocDrain, PS_Default, ["FlocTankCon"])
FlocDrainHorizNipple := PipeSUBF(FlocDrainHorizNipple_Origin, T_PlantWall + S_Fitting + ConRadius(ND_FlocDrain) - ElbowRadius(ND_FlocDrain), [0; 0]*deg, ND_FlocDrain, PS_Default, ["FlocTankCon"])
FlocDrainStub := PipeF(FlocDrainCoupling_Origin, Z_FlocDrainDumpStub - FlocDrainCoupling_Origin[2], [0; 90]*deg, ND_FlocDrain, PS_Default)
FlocDrainPlumbingScript := stack(FlocDrainPipeLayer, FlocDrainHorizNipple, FlocDrainVertNipple, FlocDrainPipeFrz, FlocDrainFittingLayer, FlocDrainElbow, FlocDrainCoupling, FlocDrainFittingFrz, FlocDrainRemovableLayer, FlocDrainStub, FlocDrainRemovableFrz)
AC_FlocTank := stack(FlocConScript, FlocDrainPlumbingScript, FlocLaminaScript)
# [component: inputs AC_FlocTank]
