Q_Plant := 30*L/s
# [reference: ExpertInputs.xmcd]
# [reference: MathFunctions.xmcd]
# [reference: PipeDatabase.xmcd]
# [reference: MaterialsDatabase.xmcd]
# [reference: FluidsFunctions.xmcd]
# [reference: CdcFunctions.xmcd]
# [reference: SedimentationTank.xmcd]
# [reference: LFOM.xmcd]
T_FlocBaffle := T_SedPlate
ND_EtMod := ND_SedMod
S_EtPlate := S_SedPlate
B_EtPlate := S_EtPlate + T_SedPlate
# This design algorithm for a flocculator that maintains efficient geometry was adapted from Monroe's worksheet "Flocculator design high efficiency mw24" which should be in the Under Development folder. Refer to that file for full explanation and exploration of the basic design algorithm. This algorithm differs in that it accounts for space lost to a grit chamber at the beginning of the first channel and to the sed tank entrance at the end of the last channel. It also accounts for having an integer number of baffles in each channel.
# Design Algorithm steps
# Calculate entrance tank length in the first channel as a function of channel width
# Calculate the total volume of flocculator given head loss and collision potential
# Calculate the number of channels by taking the total volume, depth, and channel length, and dividing by the maximum channel width (taking into account volume lost to worst-case entrance tank at the beginning and volume lost to the sed tank entrance channel at the end)
# Calculate the channel width that gives the required volume with the calculated number of channels, which also gives entrance tank length
# Calculate the minimum number of obstacles and spacing between obstacles by assuming a maximum H/S ratio
# Calculate the spacing between baffles to achieve the target energy dissipation rate that will give the target head loss and collision potential. Correct baffle spacing to get integer number of baffles in a channel.
# Calculate the obstacle width (and nominal pipe diameter)
# Entrance tank
# The design of the plate settler unit is a function of the channel width. Here the entrance tank lengths are defined in terms of the channel width. The flocculator design then uses the worst case of the minimum flocculator channel width in its preliminary assumption of how much volume the entrance tank will take up.
# Single drain pipe diameter
ND_EtDrain := D_pipeschedule(Q_Plant, PS_Default, 2 m, 2 m, Nu_Water, E_Pvc, K_PipeEnt + K_PipeExit + K_El90)
# Plate settler unit
fN_EtPlates(W_Channel) := ceil(sqrt(Q_Plant/((S_EtPlate + T_SedPlate)*W_Channel*V_EtCapture*sin(AN_EtPlate))))
# Number of plates that minimizes total length of the plate settler unit.
fL_EtPlate(W_Channel) := Ceil(Q_Plant/(fN_EtPlates(W_Channel)*W_Channel*V_EtCapture*cos(AN_EtPlate)) - S_EtPlate*tan(AN_EtPlate), 10 cm)
# Length calculations
L_EtTopPlateExtension := HL_Lfom/sin(AN_EtPlate) + 5 cm
L_EtWallToPlate := ConRadius(ND_EtDrain) + S_Fitting + outerradius(ND_EtDrain)
L_EtBackWallToLfom := max(2*S_Fitting, ElbowRadius(ND_RMPipe) + SocketDepth(ND_RMPipe) + CouplingLength(ND_RMPipe) - T_PlantWall - outerradius(ND_RMPipe))
fL_EtFrontWallToLfom(W_Channel) := L_EtWallToPlate + max((fL_EtPlate(W_Channel) + L_EtTopPlateExtension)*cos(AN_EtPlate) + T_SedPlate*sin(AN_EtPlate), (fN_EtPlates(W_Channel)*T_SedPlate + (fN_EtPlates(W_Channel) - 1)*S_EtPlate)*sin(AN_EtPlate) + fL_EtPlate(W_Channel)*cos(AN_EtPlate))
fL_Et(W_Channel) := fL_EtFrontWallToLfom(W_Channel) + outerdiameter(ND_RMPipe) + L_EtBackWallToLfom
# Flocculator efficiency
# It might be reasonable to allow for some Π.HS values that are greater than the value calculated above especially since the efficiency won't be affected that quickly. I think we need to have a slighly higher maximum H/S ratio so that creating a viable design is always possible.
Pi_HSMin := 3
Pi_HSMax := 6
α_ε := 2  # Define this for all subsequent analysis because we are assuming that our design will be in the high efficiency range.
α_ψ := 1/α_ε^(1/6) = 0.890899
# Required volume based on target head loss and collision potential
HL_FlocBod := 40 cm
# Calculate average energy dissipation rate from the target head loss.
ε_FlocAveBod := (g*HL_FlocBod/(CP_FlocBod*α_ε^(1/6)))^(3/2)
θ_FlocMin := CP_FlocBod/(ε_FlocAveBod^(1/3)*α_ψ)
Vol_FlocMin := Q_Plant*θ_FlocMin
# Number of channels and channel width
# Water depth at the end of the flocculator
Z_FlocBottom := Plant_Origin[2] + T_FlocSlab
HW_FlocEnd := ZW_SedInletChannel - Z_FlocBottom
# Channel width constraints
# The channel width is contrained by the minimum constructable width (1/2 sheet), the maximum width (full baffle sheet) and by the minimum width that achieves an H/S ratio greater than 3.
W_FlocChannelMaxPlate := W_SedPlate
W_FlocChannelMinPlate := W_SedPlate/2
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W_FlocChannelMinEfficient := Pi_HSMin*(K_FlocBaffle/(2*HW_FlocEnd*ε_FlocAveBod))^(1/3)*Q_Plant/HW_FlocEnd
# The channel width must be greater than 1/2 of the plate width and greater than the minimum width to achieve a Π.HS>3.
W_FlocChannelMin := max(W_FlocChannelMinEfficient, W_FlocChannelMinPlate)
# Channel length and worst-case entrance tank length
L_Floc := L_Sed
L_EtMax := fL_Et(W_FlocChannelMin)
# Number of channels and channel width
# Assume we can use as large a width as the max plate width in order to get the fewest number of channels possible to minimize cost. Constrained to be an even number of channels to keep the entrance tank accross the walkway from the chemical platforms.
#
# Use double the length taken up by the entrance channel to the sed tanks because the baffles that will need to be removed in order to end on a high baffle will likely account for additional volume.
N_FlocChannels := Ceil((Vol_FlocMin/(W_FlocChannelMaxPlate*HW_FlocEnd) + L_EtMax + T_PlantWall + 2*W_SedInletChannelPreWeir)/L_Floc, 2)
W_FlocChannelCP := Ceil(Vol_FlocMin/(HW_FlocEnd*(N_FlocChannels*L_Floc - L_EtMax - T_PlantWall - 2*W_SedInletChannelPreWeir)), 1 cm)
# The max function is required to make sure that we don't specify a channel narrower than the minimum width for the low flow rates where the length of the sedimentation tank gives a channel length that is longer than required to meet the required collision potential.
W_FlocChannel := max(W_FlocChannelCP, W_FlocChannelMin)
L_Et := fL_Et(W_FlocChannel)
# Obstacle spacing
# Find the maximum distance between obstacles. In this analysis H is the distance between obstacles rather than the depth of water.
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H_FlocObstacleMax := (K_FlocBaffle/(2*ε_FlocAveBod))^(1/4)*(Pi_HSMax*Q_Plant/W_FlocChannel)^(3/4)
# Find the minimum number of expansions per baffle space.
N_FlocSpaceExpansions := ceil(HW_FlocEnd/H_FlocObstacleMax)
# This number of obstacles includes the expansion created by the baffle. Calculate the distance between expansions.
H_FlocObs := HW_FlocEnd/N_FlocSpaceExpansions
# Baffle spacing
# Note that in this equation we now use the distance between expansions as calculated above rather than the water depth for H.
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S_FlocBaffleMin := (K_FlocBaffle/(2*H_FlocObs*ε_FlocAveBod))^(1/3)*(Q_Plant/W_FlocChannel)
N_FlocChannelSpaces := Ceil((L_Floc + T_FlocBaffle)/(S_FlocBaffleMin + T_FlocBaffle), 2)
N_FlocChannelBaffles := N_FlocChannelSpaces - 1
S_FlocBaffle := (L_Floc - N_FlocChannelBaffles*T_FlocBaffle)/N_FlocChannelSpaces
# Number of baffle spaces and expansions
# First channel
N_FlocFirstChannelSpaces := Floor((L_Floc - L_Et - T_PlantWall + T_FlocBaffle)/(S_FlocBaffle + T_FlocBaffle) + 1, 2) - 1
N_FlocFirstChannelBaffles := N_FlocFirstChannelSpaces
# Last channel
N_FlocLastChannelSpaces := Floor((L_Floc - W_SedInletChannelPreWeir + T_FlocBaffle)/(S_FlocBaffle + T_FlocBaffle), 2)
N_FlocLastChannelBaffles := N_FlocLastChannelSpaces
# Total
N_FlocSpaces := N_FlocFirstChannelSpaces + N_FlocLastChannelSpaces + N_FlocChannelSpaces*(N_FlocChannels - 2)
N_FlocExpansions := N_FlocSpaces*N_FlocSpaceExpansions
# Final parameters
# Collision potential
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CP_FlocObs := (K_FlocBaffle^2*H_FlocObs^4/(4*α_ε))^(1/6) = 0.793847 m^(2/3)
CP_Floc := N_FlocExpansions*CP_FlocObs = 77.797 m^(2/3)
# Fluid velocity
# The fluid velocity is a traditional design target and thus we can compare our design with tradition.
V_Floc := Q_Plant/(S_FlocBaffle*W_FlocChannel) = 0.188495 m/s
V_MaxSchulz := 0.3*m/s
V_Max10State := 1.5*ft/s = 0.4572 m/s
V_MinSchulz := 0.1*m/s
V_Min10State := 0.5*ft/s = 0.1524 m/s
# Head loss
HL_Floc := K_FlocBaffle*V_Floc^2/(2*g)*N_FlocExpansions = 0.443827 m
# H/S ratio
Pi_FlocHSMin := H_FlocObs/S_FlocBaffle = 3.3089
# Geometry for the baffle spaces at the end of the flocculator where head loss hasn't accumulated (and for contractions below the top row in the case of additional obstacles, where head loss does not effect length of the expansion.
Pi_FlocHSMax := (H_FlocObs + HL_Floc)/S_FlocBaffle = 5.26094  # Geometry where head loss effects the length of the expansion
# Energy dissipation rate
ε_FlocAve := K_FlocBaffle/(2*H_FlocObs)*(Q_Plant/(W_FlocChannel*S_FlocBaffle))^3 = 11.1276 mW/kg
ε_FlocMax := α_ε*ε_FlocAve = 22.2551 mW/kg
# Average velocity gradient
G_FlocAve := sqrt(ε_FlocAve/Nu_Water) = 105.487 1/s
# Residence time
# This is the actual residence time
Ti_Floc := (N_FlocChannels*L_Floc - L_Et - T_PlantWall)*W_FlocChannel*(HW_FlocEnd + HL_Floc/2)/Q_Plant = 8.04263 min
Ti_FlocActive := (N_FlocChannels*L_Floc - L_Et - T_PlantWall - (S_FlocBaffle*(N_FlocChannelSpaces - N_FlocLastChannelSpaces)))*W_FlocChannel*HW_FlocEnd/Q_Plant = 6.74284 min
# G Theta
Gθ_Floc := G_FlocAve*Ti_FlocActive = 42677
# Obstacle design
Pi_VCBaffle := 1/(sqrt(K_FlocBaffle) + 1)
# The obstacles will block the flow such that the contraction occupies Pi_VCBaffle = 0.387426of the width of the space between the baffles.
W_FlocObstacleWake := S_FlocBaffle*(1 - Pi_VCBaffle)
# For half pipes, assume there is no vena contracta, so the un-blocked space should be equal to the width of the jet following the turn around a plate. The obstacles are the same for upflow and downflow spaces.
ND_FlocObs :=
    i ← 0
    ND_Obs ← AvailND[i]
    while W_FlocObstacleWake > 2*outerradius(ND_Obs)
        i ← i + 1
        ND_Obs ← AvailND[i]
    return ND_Obs
# Flocculator dimensions
# Elevations
ZW_FlocMax := Z_FlocBottom + HW_FlocEnd + HL_Floc
Z_FlocTop := ZW_FlocMax + H_PlantFreeboard
Z_FlocLowBaffleTop := Z_FlocBottom + HW_FlocEnd - S_FlocBaffle*Pi_FlocBaffle
Z_FlocHighBaffleBottom := Z_FlocBottom + S_FlocBaffle*Pi_FlocBaffle
H_Floc := Z_FlocTop - Z_FlocBottom
# Baffles
H_FlocBaffleLow := Z_FlocLowBaffleTop - Z_FlocBottom
H_FlocBaffleHigh := Z_FlocTop - Z_FlocHighBaffleBottom
B_FlocBaffle := S_FlocBaffle + T_FlocBaffle
# Ports
W_FlocPort := S_FlocBaffle - S_FlocBaffleSetBackPlastic
H_FlocPort := S_FlocBaffle*W_FlocChannel/W_FlocPort
W_Floc := N_FlocChannels*W_FlocChannel + (N_FlocChannels - 1)*T_PlantWall
# Final entrance tank dimensions
# Plate settlers
N_EtPlates := fN_EtPlates(W_FlocChannel)
L_EtPlate := fL_EtPlate(W_FlocChannel)
# Lengths
L_EtFrontWallToLfom := fL_EtFrontWallToLfom(W_FlocChannel)
L_EtSlope1 := -(ConRadius(ND_EtDrain) - outerradius(ND_EtDrain)) + (N_EtPlates*T_SedPlate + (N_EtPlates - 1)*S_EtPlate + CapHeight(ND_EtMod))*sin(AN_EtPlate) + L_EtPlate*cos(AN_EtPlate) = 0.718013 m
L_EtSlope2 := L_Et - L_EtSlope1 - L_EtWallToPlate - (ConRadius(ND_EtDrain) - outerradius(ND_EtDrain)) = 0.733207 m
# Width
W_Et := W_FlocChannel
# Rapid mix
D_RMOrifice := D_PipeED(ED_RapidMix, Q_Plant, Pi_VenaContractaOrifice, Pi_JetRound)
HL_RMMicroOrifice := h_orifice(D_RMOrifice, Pi_VenaContractaOrifice, Q_Plant)
HL_RMPipe := h_l(Q_Plant, innerdiameter(ND_RMPipe, PS_Default), 2 m, K_El90 + K_PipeExit, Nu_Water, E_Pvc)
# Elevations and heights
Z_LfomBottom := ZW_FlocMax + HL_RMMicroOrifice + HL_RMPipe + H_Freefall
ZW_EtMax := Z_LfomBottom + HL_Lfom
Z_EtTop := ZW_EtMax + H_PlantFreeboard
H_Et := Z_EtTop - Z_FlocBottom
# This is not apparent depth, but if the entrance tank and flocculator share a slab it's the distance from the slab to the top of the entrance tank wall. The base of the entrance tank is then filled in (or left empty as a coagulant contact chamber).
H_EtSlope1 := L_EtSlope1*tan(AN_EtPlate) = 1.24364 m
Z_EtDrain := Z_LfomBottom - (B_SedPlate*(N_EtPlates - 1) + CapHeight(ND_EtMod))*cos(AN_EtPlate) - H_EtSlope1 = 0.855042 m
H_EtSlope2 := min(Z_LfomBottom - Z_EtDrain - H_EtSlope1, L_EtSlope2*tan(AN_EtPlate))
H_EtDrain := Z_EtDrain - Z_FlocBottom
