Q_Plant := 32*L/s
# [reference: ExpertInputs.xmcd]
# [reference: MathFunctions.xmcd]
# [reference: PipeDatabase.xmcd]
# [reference: MaterialsDatabase.xmcd]
# [reference: FluidsFunctions.xmcd]
# [reference: SedTankFunctions.xmcd]
# [reference: CdcFunctions.xmcd]
# [reference: LfomFunctions.xmcd]
# [reference: SedimentationTank.xmcd]
Pi_JSOptMin := 3
T_Acrylic := 5 mm
T_FlocSlab := 15 cm
T_FlocBaffleH := T_PlantWall = 0.15 m
# design at half flow rate for plants which are "double train" i.e. over 100Lps. this applies to the sed tank, flocculator and lfom files, in the entrance tank file this returns to the design flow and then goes back to half for the srsf.
# Generic
# Ρ
# S
# J
# Vertical
# Width
# Space
# Height
# Horizontal
# Height
# Space
# Width
# use Q.Train instead of Q.Train (mrf222)
J_JS(Pi_JS, S) := Pi_JS*S
# Flocculator efficiency based on CFD results
Pi_VCBaffle := 1/(sqrt(K_FlocBaffle) + 1) = 0.387426
# |
# |
# |
# |
# |
# |
# |
# |
# |
# |
# |
# |
# |
# |
# |
# |
# |
# |
# |
# |
# |
# |
# |
# |
# |
# |
# |
# |
# |
# |
# |
# |
# |
# |
# |
# |
# |
# |
# |
# |
# |
# |
# |
# |
# |
# |
# |
# |
# |
# |
# |
# |
# |
# |
# |
# |
# |
# |
# |
# |
# |
# |
# |
# |
# |
# |
# |
# |
# |
# |
# |
# |
# |
# |
# |
# |
# |
# |
# |
# |
# |
# |
# |
# |
# |
# |
# |
# |
# |
# |
# |
# |
# |
# |
# |
# |
# |
# |
# |
# |
# |
# |
# |
# |
# |
# |
# |
# |
# |
# |
# |
# |
# |
# |
# |
# |
# |
# |
# |
# |
# |
# |
# |
# |
# |
# |
# Non-uniformity of the energy dissipation rate is a function of J/S ratio:
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# For 3 < J/S < 5
# For J/S > 5
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α_ε(Pi_JS) := max(2, Pi_JetPlane^3/Pi_VCBaffle^4*2/K_FlocBaffle*Pi_JS)
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# Flocculator efficiency:
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α_ψ(Pi_JS) := (1/α_ε(Pi_JS))^(1/6)
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# Collision potential for one baffle:
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ψ_B(J, S) := α_ψ(J/S)*J^(2/3)*(K_FlocBaffle/2)^(1/3)
Pi_JSGraph := 3 .. 40  # Used to create the graphs
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# Horizontal vs vertical flocculator decision
S_FlocBaffleMinH := W_HumanMin = 0.5 m
# Will generally only use horizontal flocculator if flow rate is great enough that efficient geometry (J/S >= 3) gives at least the target max ED when matching the flocculator depth with the sedimentation tank and maintaining human width between baffles for ease of construction.
#
# To simplifying construction the flocculator will by default always match the sed tank depth. However by manually setting the variable H.FlocOption in Expert Inputs a shallower horizontal flocculator can be forced.
Q_MinHorizontal := (HW_Sed - T_FlocSlab)*S_FlocBaffleMinH*(J_JS(Pi_JSOptimal, S_FlocBaffleMinH)*ED_Floc/K_FlocBaffle)^(1/3) = 155.806 L/s
Q_MinHorizontalHighHtoS := (Pi_VCBaffle*S_FlocBaffleMinH)^(4/3)*(HW_Sed - T_FlocSlab)/Pi_JetPlane*ED_Floc^(1/3) = 184.045 L/s
# Not used because we won't design non-optimal horizontal flocculators, but Q to meet ED target for J/S > 5 is independent of flow path length (J). Based only on depth and min baffle spacing. This is the same as Q.MinHorizontal above for J/S = 5 (approx.)
EN_FlocHoriz :=
    EN_FlocHoriz ← 1 if Q_Train > Q_MinHorizontal
    EN_FlocHoriz ← 1 if H_FlocOption == -1
    EN_FlocHoriz ← 0 otherwise
T_FlocBaffle :=
    T_FlocBaffleH if EN_FlocHoriz == 1
    T_SedPlate otherwise
T_FlocChannelWall :=
    T_Acrylic if Q_Train ≤ Q_PlantMaxLF
    T_PlantWall otherwise
    = 0.15 m
S_FlocPortGap :=
    S_FlocBaffleSetBackPlastic if EN_FlocHoriz == 0
    0 m otherwise
    = 0.02 m
# Horizontal flocculator design
# The maximum depth of a horizontal flocculator for a given flow rate corresponds to a minimum baffle spacing (S) and a width (J) that optimizes the J/S ratio for that minimum S. This is the water level that gives the desired energy dissipation rate.
H_MaxOptHorizF(Q, S_Min, Pi_JS, ED_MaxBod) := Q/S_Min*(K_FlocBaffle/(J_JS(Pi_JS, S_Min)*ED_MaxBod))^(1/3)
H_MaxOptHoriz := H_MaxOptHorizF(Q_Train, S_FlocBaffleMinH, Pi_JSOptimal, ED_Floc) = 0.352206 m
# Need water height in sed tank inlet channel measured from bottom of drain pipe
HW_FlocEnd :=
    HW_Sed - T_FlocSlab if H_FlocOption == 0 or H_MaxOptHoriz > (HW_Sed - T_FlocSlab)
    H_MaxOptHoriz if H_FlocOption == -1
    H_FlocOption*m if H_FlocOption > 0
    = 1.71486 m
# The flocculator shares the same foundation level with the sed tank when H.FlocOption is 0 OR when the optimal depth for the horizontal flocculator with the min baffle spaces is greater than the sed tank depth. This means that the flocculator will never be deeper than the sed tank unless the depth is manually inputted by assigning a positive value to H.FlocOption.
N_FlocSpacesFH(L, T, S_Min) := (Floor((L + T)/(S_Min + T) + 1, 2) - 1)
# This gives the number of spaces per channel for a horizontal flocculator. Floor to ensure minimum spacing constraint met for horizontal. Subtracting 1 forces it to be odd. Add one before flooring though to get more accurate estimate.
SofN_FlocBaffleF(L, T, N_Spaces) := (L + T)/N_Spaces - T
# This calculates the spacing between baffles given a number of spaces in a channel. Will always be greater than the min S used to calculate N.
S_FlocBaffleED(Q, P, Pi_JS, ED_MaxBod) := (Q/P)^(3/4)*(K_FlocBaffle/(Pi_JS*ED_MaxBod))^(1/4)  # Baffle spacing function for target ED for known P and J/S.
S_FlocBaffleHEst := max(S_FlocBaffleMinH, S_FlocBaffleED(Q_Train, HW_FlocEnd, Pi_JSOptimal, ED_Floc)) = 0.5 m
S_FlocBaffleH := SofN_FlocBaffleF(L_Sed, T_FlocBaffleRigidH, N_FlocSpacesFH(L_Sed, T_FlocBaffleRigidH, S_FlocBaffleHEst)) = 0.547962 m
W_FlocChannelH := S_FlocBaffleH*Pi_JSOptMin = 1.64389 m
ψ_SpaceH := ψ_B(W_FlocChannelH, S_FlocBaffleH) = 1.33674 m^(2/3)  # Collision potential per space
# Total number of spaces needed to achieve target collision potential
N_FlocSpacesNeededH := ceil(CP_Floc/ψ_SpaceH) = 57
N_FlocSpacesPerChannelH := N_FlocSpacesFH(L_Sed, T_FlocBaffleRigidH, S_FlocBaffleH) = 13
# Determines the number of channels needed based on the number of spaces per channel and the total number of spaces.
N_FlocChannelsH :=
    ceil(N_FlocSpacesNeededH/N_FlocSpacesPerChannelH) if mod(ceil(N_FlocSpacesNeededH/N_FlocSpacesPerChannelH), 2) == 0
    ceil(N_FlocSpacesNeededH/N_FlocSpacesPerChannelH) + 1 otherwise
    = 6
N_FlocChannelSpacesH :=
    for i ∈ 0 .. N_FlocChannelsH - 1
        Spaces[i] ← N_FlocSpacesPerChannelH - (i == (N_FlocChannelsH - 1))*Floor(W_SedInletChannelPreWeir/S_FlocBaffleH, 2)
    return Spaces
N_FlocChannelBafflesH := N_FlocChannelSpacesH - 1  # Array of numbers of baffles in each channel
# Head loss per floc baffle in horiz flocculator
HL_FlocBaffleH(HW) := K_FlocBaffle*(Q_Train/(S_FlocBaffleH*HW))^2/(2*g)
N_FlocSpacesTotalH := sum(N_FlocChannelSpacesH) = 78
HL_FlocH :=
    HL ← 0 m
    for i ∈ 0 .. N_FlocSpacesTotalH - 1
        HW_space ← HW_FlocEnd + HL
        HL ← HL + HL_FlocBaffleH(HW_space)
    return HL
    = 0.0114541 m
# Opening to the first space in each channel:
# Extending the center wall between channels into the last flow path creates an expansion in the first baffle space of each channel that would otherwise be wasted. We design the width of the opening such that the vena contracta the follows it has the same velocity as the vena contracta following flow around a baffle.
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L_FlocWallExtensionH := S_FlocBaffleH*(Pi_VenaContractaOrifice - Pi_VCBaffle)/Pi_VenaContractaOrifice = 0.210987 m
# Parameters:
ψ_FlocTotalH := ψ_SpaceH*N_FlocSpacesTotalH = 104.266 m^(2/3)
V_FlocH := Q_Train/((HW_FlocEnd + HL_FlocH/2)*S_FlocBaffleH) = 0.0339408 m/s
ED_FlocMaxH := α_ε(W_FlocChannelH/S_FlocBaffleH)*K_FlocBaffle*Q_Train^3/(2*W_FlocChannelH*S_FlocBaffleH^3*HW_FlocEnd^3) = 0.0600589 mW/kg
ED_FlocAveH := K_FlocBaffle*Q_Train^3/(2*W_FlocChannelH*S_FlocBaffleH^3*HW_FlocEnd^3) = 0.0300294 mW/kg
θ_FlocH := N_FlocChannelsH*(L_Sed*W_FlocChannelH*(HW_FlocEnd + HL_FlocH/2) - (N_FlocSpacesPerChannelH - 1)*T_FlocBaffle*(HW_FlocEnd + HL_FlocH/2)*(W_FlocChannelH - S_FlocBaffleH))/Q_Train = 78.7328 min
G_FlocH := (ED_FlocAveH/Nu_Water)^(1/2) = 5.47991 1/s
Gθ_FlocH := G_FlocH*θ_FlocH = 25886.9
S_FlocBaffleIterative(Q, W, J, S, ED) := (K_FlocBaffle*α_ε(J/S)/(2*J*ED))^(1/3)*Q/W  # recursive function
# For vertical, you have to iterate to find the spacing.
# Monroe put this in to make a later step more clear for vertical. It's just a rearrangement of the above equation.
W_FlocChannelV(Q, J, S, ED) := (K_FlocBaffle*α_ε(J/S)/(2*J*ED))^(1/3)*Q/S
# Cost Optimization Functions for Vertical Flocculators
# does not take into account use of ferrocement baffles!
T_Slab := 15 cm
Cost_UnitConcrete := 150*USD/yd^3 = 196.193 base_currency/m^3
Cost_UnitBaffle := 360/19*USD/(12 ft) = 5.18027 base_currency/m
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Cost_UnitWall := 950/19*USD/m^2 = 50 base_currency/m^2
Cost_UnitSlab := (575 + 700)/19*USD/m^2
# For H/S > 5 (will be the greater of the two when H/S > 5)
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# These are equal when H/S = 5
S_FlocEstVF(ED_FlocBod, Q_Train, W_FlocChannel, HW_FlocEnd) := max((K_FlocBaffle/(ED_FlocBod*HW_FlocEnd))^(1/3)*Q_Train/W_FlocChannel, 1/(ED_FlocBod^(1/4)*Pi_VCBaffle)*(Pi_JetPlane*Q_Train/W_FlocChannel)^(3/4))
# For H/S < 5 (will be the greater of the two when H/S < 5)
N_FlocChannelSpacesVF(ED_FlocBod, Q_Train, W_FlocChannel, L_FlocChannel, T_FlocBaffle, HW_FlocEnd) := Floor((L_FlocChannel + T_FlocBaffle)/(S_FlocEstVF(ED_FlocBod, Q_Train, W_FlocChannel, HW_FlocEnd) + T_FlocBaffle), 2)
S_FlocVF(ED_FlocBod, Q_Train, W_FlocChannel, L_FlocChannel, T_FlocBaffle, HW_FlocEnd) := (L_FlocChannel + T_FlocBaffle - N_FlocChannelSpacesVF(ED_FlocBod, Q_Train, W_FlocChannel, L_FlocChannel, T_FlocBaffle, HW_FlocEnd)*T_FlocBaffle)/N_FlocChannelSpacesVF(ED_FlocBod, Q_Train, W_FlocChannel, L_FlocChannel, T_FlocBaffle, HW_FlocEnd)
ψ_BaffleEstVF(ED_FlocBod, Q_Train, W_FlocChannel, L_FlocChannel, T_FlocBaffle, HW_FlocEnd, AN_FlocSlope) := ψ_B(HW_FlocEnd - tan(AN_FlocSlope)*L_FlocChannel, S_FlocVF(ED_FlocBod, Q_Train, W_FlocChannel, L_FlocChannel, T_FlocBaffle, HW_FlocEnd))
N_FlocChannelsVF(ED_FlocBod, Q_Train, W_FlocChannel, L_FlocChannel, T_FlocBaffle, HW_FlocEnd, AN_FlocSlope) := Ceil(CP_Floc/(N_FlocChannelSpacesVF(ED_FlocBod, Q_Train, W_FlocChannel, L_FlocChannel, T_FlocBaffle, HW_FlocEnd)*ψ_BaffleEstVF(ED_FlocBod, Q_Train, W_FlocChannel, L_FlocChannel, T_FlocBaffle, HW_FlocEnd, AN_FlocSlope)), 2)
N_FlocBafflesMissingLastChannelVF(ED_FlocBod, Q_Train, W_FlocChannel, L_FlocChannel, T_FlocBaffle, HW_FlocEnd) := Ceil(W_SedInletChannelPreWeir/S_FlocVF(ED_FlocBod, Q_Train, W_FlocChannel, L_FlocChannel, T_FlocBaffle, HW_FlocEnd), 2) - 1
N_FlocSpacesVF(ED_FlocBod, Q_Train, W_FlocChannel, L_FlocChannel, T_FlocBaffle, HW_FlocEnd, AN_FlocSlope) := N_FlocChannelsVF(ED_FlocBod, Q_Train, W_FlocChannel, L_FlocChannel, T_FlocBaffle, HW_FlocEnd, AN_FlocSlope)*N_FlocChannelSpacesVF(ED_FlocBod, Q_Train, W_FlocChannel, L_FlocChannel, T_FlocBaffle, HW_FlocEnd) - N_FlocBafflesMissingLastChannelVF(ED_FlocBod, Q_Train, W_FlocChannel, L_FlocChannel, T_FlocBaffle, HW_FlocEnd) - 1
HL_FlocSpaceVF(ED_FlocBod, Q_Train, W_FlocChannel, L_FlocChannel, T_FlocBaffle, HW_FlocEnd, HW) := K_FlocBaffle*(Q_Train/(S_FlocVF(ED_FlocBod, Q_Train, W_FlocChannel, L_FlocChannel, T_FlocBaffle, HW_FlocEnd)*HW))^2/(2*g)
H_FlocFloorVF(ED_FlocBod, Q_Train, W_FlocChannel, L_FlocChannel, T_FlocBaffle, HW_FlocEnd, AN_FlocSlope) :=
    B_Floc ← S_FlocVF(ED_FlocBod, Q_Train, W_FlocChannel, L_FlocChannel, T_FlocBaffle, HW_FlocEnd) + T_FlocBaffle
    N_SpacesLastChannel ← N_FlocChannelSpacesVF(ED_FlocBod, Q_Train, W_FlocChannel, L_FlocChannel, T_FlocBaffle, HW_FlocEnd) - N_FlocBafflesMissingLastChannelVF(ED_FlocBod, Q_Train, W_FlocChannel, L_FlocChannel, T_FlocBaffle, HW_FlocEnd) - 1
    N_SpacesOtherChannels ← N_FlocChannelSpacesVF(ED_FlocBod, Q_Train, W_FlocChannel, L_FlocChannel, T_FlocBaffle, HW_FlocEnd)
    N_Channels ← N_FlocChannelsVF(ED_FlocBod, Q_Train, W_FlocChannel, L_FlocChannel, T_FlocBaffle, HW_FlocEnd, AN_FlocSlope)
    H_Slope[0] ← tan(AN_FlocSlope)*(1/2*S_FlocVF(ED_FlocBod, Q_Train, W_FlocChannel, L_FlocChannel, T_FlocBaffle, HW_FlocEnd) + (N_FlocBafflesMissingLastChannelVF(ED_FlocBod, Q_Train, W_FlocChannel, L_FlocChannel, T_FlocBaffle, HW_FlocEnd) + 1)*B_Floc)
    for i ∈ 0 .. N_SpacesLastChannel - 1
        H_Slope[i + 1] ← H_Slope[i] + B_Floc*tan(AN_FlocSlope)*(i ≠ N_SpacesLastChannel - 1)
    for j ∈ 1 .. N_Channels - 1
        for k ∈ 0 .. N_SpacesOtherChannels - 1
            if j ≠ N_Channels - 1 or k ≠ N_SpacesOtherChannels - 1
                SpaceIndex ← N_SpacesLastChannel + (j - 1)*N_SpacesOtherChannels + k
                H_Slope[SpaceIndex + 1] ← H_Slope[SpaceIndex] + B_Floc*tan(AN_FlocSlope)*(mod(j, 2) == 0 and k ≠ N_SpacesOtherChannels - 1) - B_Floc*tan(AN_FlocSlope)*(mod(j, 2) == 1 and k ≠ N_SpacesOtherChannels - 1)
    return H_Slope
H_eFlocSpacesVF(ED_FlocBod, Q_Train, W_FlocChannel, L_FlocChannel, T_FlocBaffle, HW_FlocEnd, AN_FlocSlope) :=
    N_SpacesLastChannel ← N_FlocChannelSpacesVF(ED_FlocBod, Q_Train, W_FlocChannel, L_FlocChannel, T_FlocBaffle, HW_FlocEnd) - N_FlocBafflesMissingLastChannelVF(ED_FlocBod, Q_Train, W_FlocChannel, L_FlocChannel, T_FlocBaffle, HW_FlocEnd) - 1
    N_SpacesOtherChannels ← N_FlocChannelSpacesVF(ED_FlocBod, Q_Train, W_FlocChannel, L_FlocChannel, T_FlocBaffle, HW_FlocEnd)
    N_Channels ← N_FlocChannelsVF(ED_FlocBod, Q_Train, W_FlocChannel, L_FlocChannel, T_FlocBaffle, HW_FlocEnd, AN_FlocSlope)
    H_Slope ← H_FlocFloorVF(ED_FlocBod, Q_Train, W_FlocChannel, L_FlocChannel, T_FlocBaffle, HW_FlocEnd, AN_FlocSlope)
    HW ← HW_FlocEnd
    HL[0] ← 0 m
    for i ∈ 0 .. N_SpacesLastChannel - 1
        HW ← HW_FlocEnd + sum(HL) - H_Slope[i]
        HL[i] ← HL_FlocSpaceVF(ED_FlocBod, Q_Train, W_FlocChannel, L_FlocChannel, T_FlocBaffle, HW_FlocEnd, HW)
    for j ∈ 1 .. N_Channels - 1
        for k ∈ 0 .. N_SpacesOtherChannels - 1
            SpaceIndex ← N_SpacesLastChannel + (j - 1)*N_SpacesOtherChannels + k
            HW ← HW_FlocEnd + sum(HL) - H_Slope[SpaceIndex]
            HL[SpaceIndex] ← HL_FlocSpaceVF(ED_FlocBod, Q_Train, W_FlocChannel, L_FlocChannel, T_FlocBaffle, HW_FlocEnd, HW)
    return HL
H_eFlocVF(ED_FlocBod, Q_Train, W_FlocChannel, L_FlocChannel, T_FlocBaffle, HW_FlocEnd, AN_FlocSlope) := sum(H_eFlocSpacesVF(ED_FlocBod, Q_Train, W_FlocChannel, L_FlocChannel, T_FlocBaffle, HW_FlocEnd, AN_FlocSlope))
HW_FlocSpacesVF(ED_FlocBod, Q_Train, W_FlocChannel, L_FlocChannel, T_FlocBaffle, HW_FlocEnd, AN_FlocSlope) :=
    N_SpacesLastChannel ← N_FlocChannelSpacesVF(ED_FlocBod, Q_Train, W_FlocChannel, L_FlocChannel, T_FlocBaffle, HW_FlocEnd) - N_FlocBafflesMissingLastChannelVF(ED_FlocBod, Q_Train, W_FlocChannel, L_FlocChannel, T_FlocBaffle, HW_FlocEnd) - 1
    N_SpacesOtherChannels ← N_FlocChannelSpacesVF(ED_FlocBod, Q_Train, W_FlocChannel, L_FlocChannel, T_FlocBaffle, HW_FlocEnd)
    N_Channels ← N_FlocChannelsVF(ED_FlocBod, Q_Train, W_FlocChannel, L_FlocChannel, T_FlocBaffle, HW_FlocEnd, AN_FlocSlope)
    H_Slope ← H_FlocFloorVF(ED_FlocBod, Q_Train, W_FlocChannel, L_FlocChannel, T_FlocBaffle, HW_FlocEnd, AN_FlocSlope)
    HL ← H_eFlocSpacesVF(ED_FlocBod, Q_Train, W_FlocChannel, L_FlocChannel, T_FlocBaffle, HW_FlocEnd, AN_FlocSlope)
    HW[0] ← HW_FlocEnd - H_Slope[0]
    for i ∈ 0 .. N_SpacesLastChannel - 1
        HW[i + 1] ← HW[i] - (H_Slope[i + 1] - H_Slope[i]) + HL[i]
    for j ∈ 1 .. N_Channels - 1
        for k ∈ 0 .. N_SpacesOtherChannels - 1
            if j ≠ N_Channels - 1 or k ≠ N_SpacesOtherChannels - 1
                SpaceIndex ← N_SpacesLastChannel + (j - 1)*N_SpacesOtherChannels + k
                HW[SpaceIndex + 1] ← HW[SpaceIndex] - (H_Slope[SpaceIndex + 1] - H_Slope[SpaceIndex]) + HL[SpaceIndex]
    return HW
ψ_FlocSpacesVF(ED_FlocBod, Q_Train, W_FlocChannel, L_FlocChannel, T_FlocBaffle, HW_FlocEnd, AN_FlocSlope) :=
    S_Floc ← S_FlocEstVF(ED_FlocBod, Q_Train, W_FlocChannel, HW_FlocEnd)
    N_SpacesLastChannel ← N_FlocChannelSpacesVF(ED_FlocBod, Q_Train, W_FlocChannel, L_FlocChannel, T_FlocBaffle, HW_FlocEnd) - N_FlocBafflesMissingLastChannelVF(ED_FlocBod, Q_Train, W_FlocChannel, L_FlocChannel, T_FlocBaffle, HW_FlocEnd) - 1
    N_SpacesOtherChannels ← N_FlocChannelSpacesVF(ED_FlocBod, Q_Train, W_FlocChannel, L_FlocChannel, T_FlocBaffle, HW_FlocEnd)
    N_Channels ← N_FlocChannelsVF(ED_FlocBod, Q_Train, W_FlocChannel, L_FlocChannel, T_FlocBaffle, HW_FlocEnd, AN_FlocSlope)
    HW ← HW_FlocSpacesVF(ED_FlocBod, Q_Train, W_FlocChannel, L_FlocChannel, T_FlocBaffle, HW_FlocEnd, AN_FlocSlope)
    for i ∈ 0 .. N_SpacesLastChannel - 1
        ψ[i] ← ψ_B(HW[i], S_Floc)
    for j ∈ 1 .. N_Channels - 1
        for k ∈ 0 .. N_SpacesOtherChannels - 1
            SpaceIndex ← N_SpacesLastChannel + (j - 1)*N_SpacesOtherChannels + k
            ψ[SpaceIndex] ← ψ_B(HW[SpaceIndex], S_Floc)
    return ψ
ψ_FlocVF(ED_FlocBod, Q_Train, W_FlocChannel, L_FlocChannel, T_FlocBaffle, HW_FlocEnd, AN_FlocSlope) := sum(ψ_FlocSpacesVF(ED_FlocBod, Q_Train, W_FlocChannel, L_FlocChannel, T_FlocBaffle, HW_FlocEnd, AN_FlocSlope))
# The following function counts back from last baffle space in the flocculator adding up the collision potential calculated using the actual height.
#
# Actual H dimension takes into account both head loss and the bottom slope for each baffle space.
#
# Channels with water flowing down the slope have the slope height added as the function counts backwards along the baffle spaces. Channels with water flowing up the slope subtract the slope height. H.Slope is the height of the floor above the minimum elevation at a given position. It begins as the floor level in the last baffle space in the last channel (remember that the last baffle space is not at the end of the channel because at least one baffle is missing before the entrance to the sed tank inlet channel.
ψ_FlocSimpleVF(ED_FlocBod, Q_Train, W_FlocChannel, L_FlocChannel, T_FlocBaffle, HW_FlocEnd, AN_FlocSlope) := N_FlocSpacesVF(ED_FlocBod, Q_Train, W_FlocChannel, L_FlocChannel, T_FlocBaffle, HW_FlocEnd, AN_FlocSlope)*ψ_BaffleEstVF(ED_FlocBod, Q_Train, W_FlocChannel, L_FlocChannel, T_FlocBaffle, HW_FlocEnd, AN_FlocSlope)
AN_FlocSlope := atan(1 %)
Q_Train := 30*L/s
Q_Train = 30 L/s
T_FlocBaffle := T_SedPlate = 0.002 m
ψ_FlocSimpleVF(10*mW/kg, Q_Train, 54 cm, L_Sed, T_FlocBaffle, HW_FlocEnd, AN_FlocSlope) = 145.05 m^(2/3)
ψ_FlocVF(10*mW/kg, Q_Train, 54 cm, L_Sed, T_FlocBaffle, HW_FlocEnd, AN_FlocSlope) = 147.034 m^(2/3)
HW := HW_FlocSpacesVF(10*mW/kg, Q_Train, 54 cm, L_Sed, T_FlocBaffle, HW_FlocEnd, AN_FlocSlope)
HL := H_eFlocSpacesVF(10*mW/kg, Q_Train, 54 cm, L_Sed, T_FlocBaffle, HW_FlocEnd, AN_FlocSlope)
H_Floor := H_FlocFloorVF(10*mW/kg, Q_Train, 54 cm, L_Sed, T_FlocBaffle, HW_FlocEnd, AN_FlocSlope)
ψ := ψ_FlocSpacesVF(10*mW/kg, Q_Train, 54 cm, L_Sed, T_FlocBaffle, HW_FlocEnd, AN_FlocSlope)
HW = [
    1.7069; 1.70411; 1.70131; 1.69852; 1.69573; 1.69294; 1.69015; 1.68736; 1.68458; 1.68179
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] m
HL = [
    0.392401; 0.39369; 0.394984; 0.396284; 0.397589; 0.398901; 0.400218; 0.401542; 0.402871; 0.404206
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] mm
H_Floor = [
    0.795921; 1.11469; 1.43346; 1.75223; 2.07099; 2.38976; 2.70853; 3.0273; 3.34607; 3.66484
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] cm
ψ = [
    1.34279; 1.34169; 1.34059; 1.33949; 1.33839; 1.33729; 1.33619; 1.33509; 1.33398; 1.33288
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] m^(2/3)
max(ψ)/min(ψ) = 1.03584
max(HL)/min(HL) = 1.15126
i := 0 .. last(HW)
V_FlocVF(ED_FlocBod, Q_Train, W_FlocChannel, L_FlocChannel, T_FlocBaffle, HW_FlocEnd) := Q_Train/(S_FlocVF(ED_FlocBod, Q_Train, W_FlocChannel, L_FlocChannel, T_FlocBaffle, HW_FlocEnd)*W_FlocChannel)
α_εVF(ED_FlocBod, Q_Train, W_FlocChannel, L_FlocChannel, T_FlocBaffle, HW_FlocEnd) := α_ε(HW_FlocEnd/S_FlocVF(ED_FlocBod, Q_Train, W_FlocChannel, L_FlocChannel, T_FlocBaffle, HW_FlocEnd))
ED_FlocMaxVF(ED_FlocBod, Q_Train, W_FlocChannel, L_FlocChannel, T_FlocBaffle, HW_FlocEnd) := α_εVF(ED_FlocBod, Q_Train, W_FlocChannel, L_FlocChannel, T_FlocBaffle, HW_FlocEnd)*K_FlocBaffle*(V_FlocVF(ED_FlocBod, Q_Train, W_FlocChannel, L_FlocChannel, T_FlocBaffle, HW_FlocEnd)^3/(2*HW_FlocEnd))
Vol_FlocVF(ED_FlocBod, Q_Train, W_FlocChannel, L_FlocChannel, T_FlocBaffle, HW_FlocEnd, AN_FlocSlope) := W_FlocChannel*N_FlocChannelsVF(ED_FlocBod, Q_Train, W_FlocChannel, L_FlocChannel, T_FlocBaffle, HW_FlocEnd, AN_FlocSlope)*L_FlocChannel*(HW_FlocEnd + H_eFlocVF(ED_FlocBod, Q_Train, W_FlocChannel, L_FlocChannel, T_FlocBaffle, HW_FlocEnd, AN_FlocSlope)/2 - L_FlocChannel/2*tan(AN_FlocSlope))
Ti_FlocVF(ED_FlocBod, Q_Train, W_FlocChannel, L_FlocChannel, T_FlocBaffle, H_Floc, AN_FlocSlope) := Vol_FlocVF(ED_FlocBod, Q_Train, W_FlocChannel, L_FlocChannel, T_FlocBaffle, H_Floc, AN_FlocSlope)/Q_Train
H_FlocWallsVF(ED_FlocBod, Q_Train, W_FlocChannel, L_FlocChannel, T_FlocBaffle, HW_FlocEnd, AN_FlocSlope) := HW_FlocEnd + H_eFlocVF(ED_FlocBod, Q_Train, W_FlocChannel, L_FlocChannel, T_FlocBaffle, HW_FlocEnd, AN_FlocSlope) + H_PlantFreeboard
A_WallsVF(ED_FlocBod, Q_Train, W_FlocChannel, L_FlocChannel, T_FlocBaffle, HW_FlocEnd, AN_FlocSlope) := (L_FlocChannel + 2*W_FlocChannel + 2*T_PlantWall)*H_FlocWallsVF(ED_FlocBod, Q_Train, W_FlocChannel, L_FlocChannel, T_FlocBaffle, HW_FlocEnd, AN_FlocSlope)*N_FlocChannelsVF(ED_FlocBod, Q_Train, W_FlocChannel, L_FlocChannel, T_FlocBaffle, HW_FlocEnd, AN_FlocSlope)
Vol_WallsVF(ED_FlocBod, Q_Train, W_FlocChannel, L_FlocChannel, T_FlocBaffle, HW_FlocEnd, AN_FlocSlope) := (L_FlocChannel + 2*W_FlocChannel + 2*T_PlantWall)*H_FlocWallsVF(ED_FlocBod, Q_Train, W_FlocChannel, L_FlocChannel, T_FlocBaffle, HW_FlocEnd, AN_FlocSlope)*N_FlocChannelsVF(ED_FlocBod, Q_Train, W_FlocChannel, L_FlocChannel, T_FlocBaffle, HW_FlocEnd, AN_FlocSlope)*T_PlantWall
A_SlabVF(ED_FlocBod, Q_Train, W_FlocChannel, L_FlocChannel, T_FlocBaffle, HW_FlocEnd, AN_FlocSlope) := (L_FlocChannel + 2*T_PlantWall)*(W_FlocChannel + T_PlantWall)*N_FlocChannelsVF(ED_FlocBod, Q_Train, W_FlocChannel, L_FlocChannel, T_FlocBaffle, HW_FlocEnd, AN_FlocSlope)
Vol_SlabVF(ED_FlocBod, Q_Train, W_FlocChannel, L_FlocChannel, T_FlocBaffle, HW_FlocEnd, AN_FlocSlope) := (L_FlocChannel + 2*T_PlantWall)*(W_FlocChannel + T_PlantWall)*N_FlocChannelsVF(ED_FlocBod, Q_Train, W_FlocChannel, L_FlocChannel, T_FlocBaffle, HW_FlocEnd, AN_FlocSlope)*(T_Slab + L_FlocChannel/2*tan(AN_FlocSlope))
Cost_SlabVF(ED_FlocBod, Q_Train, W_FlocChannel, L_FlocChannel, T_FlocBaffle, HW_FlocEnd, AN_FlocSlope) := Cost_UnitSlab*A_SlabVF(ED_FlocBod, Q_Train, W_FlocChannel, L_FlocChannel, T_FlocBaffle, HW_FlocEnd, AN_FlocSlope)
Cost_WallVF(ED_FlocBod, Q_Train, W_FlocChannel, L_FlocChannel, T_FlocBaffle, HW_FlocEnd, AN_FlocSlope) := Cost_UnitWall*A_WallsVF(ED_FlocBod, Q_Train, W_FlocChannel, L_FlocChannel, T_FlocBaffle, HW_FlocEnd, AN_FlocSlope)
Cost_WallSlabVF(ED_FlocBod, Q_Train, W_FlocChannel, L_FlocChannel, T_FlocBaffle, HW_FlocEnd, AN_FlocSlope) := Cost_WallVF(ED_FlocBod, Q_Train, W_FlocChannel, L_FlocChannel, T_FlocBaffle, HW_FlocEnd, AN_FlocSlope) + Cost_SlabVF(ED_FlocBod, Q_Train, W_FlocChannel, L_FlocChannel, T_FlocBaffle, HW_FlocEnd, AN_FlocSlope)
# Baffle Material Costs:
L_FlocBafflesUpperVF(ED_FlocBod, Q_Train, W_FlocChannel, L_FlocChannel, T_FlocBaffle, HW_FlocEnd, Pi_Baffle) := H_FlocWallsVF(ED_FlocBod, Q_Train, W_FlocChannel, L_FlocChannel, T_FlocBaffle, HW_FlocEnd, AN_FlocSlope) - Pi_Baffle*S_FlocVF(ED_FlocBod, Q_Train, W_FlocChannel, L_FlocChannel, T_FlocBaffle, HW_FlocEnd) - 0.5*H_PlantFreeboard
L_FlocBafflesLowerVF(ED_FlocBod, Q_Train, W_FlocChannel, L_FlocChannel, T_FlocBaffle, HW_FlocEnd, Pi_Baffle) := HW_FlocEnd - Pi_Baffle*S_FlocVF(ED_FlocBod, Q_Train, W_FlocChannel, L_FlocChannel, T_FlocBaffle, HW_FlocEnd)
N_FlocBafflesUpperVF(ED_FlocBod, Q_Train, W_FlocChannel, L_FlocChannel, T_FlocBaffle, HW_FlocEnd) := (N_FlocChannelSpacesVF(ED_FlocBod, Q_Train, W_FlocChannel, L_FlocChannel, T_FlocBaffle, HW_FlocEnd)/2 - 1)*N_FlocChannelsVF(ED_FlocBod, Q_Train, W_FlocChannel, L_FlocChannel, T_FlocBaffle, HW_FlocEnd, AN_FlocSlope) - floor(1/2*N_FlocBafflesMissingLastChannelVF(ED_FlocBod, Q_Train, W_FlocChannel, L_FlocChannel, T_FlocBaffle, HW_FlocEnd))
N_FlocBafflesLowerVF(ED_FlocBod, Q_Train, W_FlocChannel, L_FlocChannel, T_FlocBaffle, HW_FlocEnd) := N_FlocChannelSpacesVF(ED_FlocBod, Q_Train, W_FlocChannel, L_FlocChannel, T_FlocBaffle, HW_FlocEnd)/2*N_FlocChannelsVF(ED_FlocBod, Q_Train, W_FlocChannel, L_FlocChannel, T_FlocBaffle, HW_FlocEnd, AN_FlocSlope) - ceil(1/2*N_FlocBafflesMissingLastChannelVF(ED_FlocBod, Q_Train, W_FlocChannel, L_FlocChannel, T_FlocBaffle, HW_FlocEnd))
L_FlocBafflesTotalVF(ED_FlocBod, Q_Train, W_FlocChannel, L_FlocChannel, T_FlocBaffle, HW_FlocEnd.Floc, Pi_Baffle) := N_FlocBafflesUpperVF(ED_FlocBod, Q_Train, W_FlocChannel, L_FlocChannel, T_FlocBaffle, HW_FlocEnd)*L_FlocBafflesUpperVF(ED_FlocBod, Q_Train, W_FlocChannel, L_FlocChannel, T_FlocBaffle, HW_FlocEnd, Pi_Baffle) + N_FlocBafflesLowerVF(ED_FlocBod, Q_Train, W_FlocChannel, L_FlocChannel, T_FlocBaffle, HW_FlocEnd)*L_FlocBafflesLowerVF(ED_FlocBod, Q_Train, W_FlocChannel, L_FlocChannel, T_FlocBaffle, HW_FlocEnd, Pi_Baffle)
Cost_BafflesVF(ED_FlocBod, Q_Train, W_FlocChannel, L_FlocChannel, T_FlocBaffle, HW_FlocEnd, Pi_Baffle) := Cost_UnitBaffle*L_FlocBafflesTotalVF(ED_FlocBod, Q_Train, W_FlocChannel, L_FlocChannel, T_FlocBaffle, HW_FlocEnd, Pi_Baffle)*((1 + (W_FlocChannel > T_SedPlate/2))/2)
Cost_FlocVF(ED_FlocBod, Q_Train, W_FlocChannel, L_FlocChannel, T_FlocBaffle, HW_FlocEnd, Pi_Baffle) := Cost_WallSlabVF(ED_FlocBod, Q_Train, W_FlocChannel, L_FlocChannel, T_FlocBaffle, HW_FlocEnd, AN_FlocSlope) + Cost_BafflesVF(ED_FlocBod, Q_Train, W_FlocChannel, L_FlocChannel, T_FlocBaffle, HW_FlocEnd, Pi_Baffle)
S_FlocVF(ED_FlocBod, Q_Train, W_FlocChannel, L_FlocChannel, T_FlocBaffle, HW_FlocEnd)
# Vertical Flocculator Dimensions
W_FlocChannelMin := max(W_HumanMin, W_SedPlate/2)
W_FlocChannelMax := W_SedPlate
W_FlocChannelArrayVF(ED_FlocBod, Q_Train, L_FlocChannel, T_FlocBaffle, H_Floc, Pi_FlocBaffleMin) :=
    for i ∈ 0 .. max(W_FlocChannelMax - W_FlocChannelMin, 0)/cm
        W_FlocArray[i] ← W_FlocChannelMin + i*cm
        Cost_FlocArray[i] ← Cost_FlocVF(ED_FlocBod, Q_Train, W_FlocArray[i], L_FlocChannel, T_FlocBaffle, H_Floc, Pi_FlocBaffleMin)
    MinCost ← min(Cost_FlocArray)
    Index ← match(min(Cost_FlocArray), Cost_FlocArray)
    W_FlocBest ← W_FlocArray[match(min(Cost_FlocArray), Cost_FlocArray)[0]]
    return W_FlocBest
# 6/25/12 - changed the last index calculation to be a max of zero and the difference between the max and min floc channel width to avoid negative values for high flow rates. As this will only occur at high flow rates when a horizontal flocculator will be drawn, this does not affect the final design, but simply avoids undefined values that will cause AC.FlocTank to be undefined at high flow rates.
Cost_FlocVF(ED_FlocBod, Q_Train, L_FlocChannel, T_FlocBaffle, H_Floc, Pi_FlocBaffleMin) :=
    for i ∈ 0 .. max(W_FlocChannelMax - W_FlocChannelMin, 0)/cm
        W_FlocArray[i] ← W_FlocChannelMin + i*cm
        Cost_FlocArray[i] ← Cost_FlocVF(ED_FlocBod, Q_Train, W_FlocArray[i], L_FlocChannel, T_FlocBaffle, H_Floc, Pi_FlocBaffleMin)
    return Cost_FlocArray
W_FlocArrayVF(ED_FlocBod, Q_Train, L_FlocChannel, T_FlocBaffle, H_Floc, Pi_FlocBaffleMin) :=
    for i ∈ 0 .. max(W_FlocChannelMax - W_FlocChannelMin, 0)/cm
        W_FlocArray[i] ← W_FlocChannelMin + i*cm
    return W_FlocArray
C := Cost_FlocVF(ED_Floc, Q_Train, L_Sed, T_FlocBaffle, HW_FlocEnd, Pi_FlocBaffleMin)
W := W_FlocArrayVF(ED_Floc, Q_Train, L_Sed, T_FlocBaffle, HW_FlocEnd, Pi_FlocBaffleMin)
# assume min pi.flocbaffle...should be ok since baffle material costs don't dominate
W_FlocChannelV := W_FlocChannelVF(ED_Floc, Q_Train, L_Sed, T_FlocBaffle, HW_FlocEnd, Pi_FlocBaffleMin) = 0.5734 m
C = [
    6317.86; 6350.05; 6382.25; 6414.44; 3235.76; 3251.83; 3267.89; 3283.95; 3300.01; 3359.07
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] USD
W = [
    53.34; 54.34; 55.34; 56.34; 57.34; 58.34; 59.34; 60.34; 61.34; 62.34
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] cm
S_FlocV := S_FlocVF(ED_Floc, Q_Train, W_FlocChannelV, L_Sed, T_FlocBaffle, HW_FlocEnd) = 0.295517 m
N_FlocChannelsV := N_FlocChannelsVF(ED_Floc, Q_Train, W_FlocChannelV, L_Sed, T_FlocBaffle, HW_FlocEnd, AN_FlocSlope) = 2
S_FlocBaffleV :=
    for i ∈ 0 .. N_FlocChannelsV - 1
        S[i] ← S_FlocV
    return S
N_FlocChannelSpacesV :=
    for i ∈ 0 .. N_FlocChannelsV - 1
        N_Spaces[i] ← N_FlocChannelSpacesVF(ED_Floc, Q_Train, W_FlocChannelV, L_Sed, T_FlocBaffle, HW_FlocEnd) - (i == (N_FlocChannelsV - 1))*N_FlocBafflesMissingLastChannelVF(ED_Floc, Q_Train, W_FlocChannelV, L_Sed, T_FlocBaffle, HW_FlocEnd)
    return N_Spaces
N_FlocChannelBafflesV := N_FlocChannelSpacesV - 1
V_FlocV := V_FlocVF(ED_Floc, Q_Train, W_FlocChannelV, L_Sed, T_FlocBaffle, HW_FlocEnd) = 0.177044 m/s
H := H_eFlocSpacesVF(ED_Floc, Q_Train, W_FlocChannelV, L_Sed, T_FlocBaffle, HW_FlocEnd, AN_FlocSlope)
H_eFlocV := H_eFlocVF(ED_Floc, Q_Train, W_FlocChannelV, L_Sed, T_FlocBaffle, HW_FlocEnd, AN_FlocSlope) = 2.69464 cm
Pi_FlocBaffle := min(Pi_FlocBaffleMax, (HW_FlocEnd - 2*ConRadius(ND_FlocModulesLarge))/(2*S_FlocV))
Pi_FlocBaffle := 1
ED_FlocMaxV := ED_FlocMaxVF(ED_Floc, Q_Train, W_FlocChannelV, L_Sed, T_FlocBaffle, HW_FlocEnd) = 9.49409 mW/kg
ED_FlocAveV := K_FlocBaffle*V_FlocVF(ED_Floc, Q_Train, W_FlocChannelV, L_Sed, T_FlocBaffle, HW_FlocEnd)^3/(2*HW_FlocEnd) = 4.04505 mW/kg
ψ_BaffleEstVF(ED_FlocBod, Q_Train, W_FlocChannel, L_FlocChannel, T_FlocBaffle, HW_FlocEnd)
Ψ_BaffleV := ψ_BaffleEstVF(ED_Floc, Q_Train, W_FlocChannelV, L_Sed, T_FlocBaffle, HW_FlocEnd) = ƒ(Unitless) → Length^2/3
Ψ_FlocV := ψ_FlocVF(ED_Floc, Q_Train, W_FlocChannelV, L_Sed, T_FlocBaffle, HW_FlocEnd, AN_FlocSlope) = 76.7349 m^(2/3)
Ti_FlocV := Ti_FlocVF(ED_Floc, Q_Train, W_FlocChannelV, L_Sed, T_FlocBaffle, HW_FlocEnd)  # error: This value must be a scalar.
# Low Flow Flocculator Dimensions
H_FlocLF := HW_Sed = 1.86486 m
T_FlocBaffleRigidV = 0.05 m
Π_HS := 5
W_FlocTankLF := W_HumanMin
fS_FlocLF(Q_Train) := (K_FlocBaffle*Q_Train^3/(Π_HS*ED_Floc))^(1/7)
fN_FlocBafflesPerChannelLF(Q_Train) := Round(W_FlocTankLF/fS_FlocLF(Q_Train), 2) - 1
N_FlocBafflesPerChannelLF := fN_FlocBafflesPerChannelLF(Q_Train) = 1
S_FlocLF(Q_Train) := W_FlocTankLF/(fN_FlocBafflesPerChannelLF(Q_Train) + 1)
N_FlocObstaclesLF(Q_Train) :=
    ceil(H_FlocLF/(S_FlocLF(Q_Train)*Π_HS)) - 1 if Q_Train ≤ Q_PlantMaxLF
    "null" otherwise
# Number of Obstacles
W_FlocChannel(Q_Train) :=
    Q_Train/S_FlocLF(Q_Train)*(K_FlocBaffle/((H_FlocLF - 2*Pi_FlocBaffle*S_FlocLF(Q_Train) + H_PlantFreeboard)/(N_FlocObstaclesLF(Q_Train) + 1)*ED_Floc))^(1/3) if Q_Train ≤ Q_PlantMaxLF
    "null" otherwise  # H is really the distance between obstacles.
W_FlocChannelLF := W_FlocChannel(Q_Train) = "null" cm  # This is the spacing between the ferrocement baffles
W_FlocChannelLast := outerdiameter(ND_SedManifold) + 2*S_Fitting = 0.319075 m
# Based on LFOM diameters for different flow rates
# We need to provide obstacles to create more energy dissipation in the vertical path between baffles because otherwise teh H/S ratio is too large. We can do this by connecting the plastic baffles with 1/2" PVC pipe and stringing larger diameter PVC pipe over the 1/2" PVC pipe as spacers and obstacles.
CP_FlocObstacleLF(Q_Train) :=
    ψ_P((H_FlocLF - 2*Pi_FlocBaffle*S_FlocLF(Q_Train) + H_PlantFreeboard)/(N_FlocObstaclesLF(Q_Train) + 1), S_FlocLF(Q_Train)) if Q_Train ≤ Q_PlantMaxLF
    "null" otherwise
CP_FlocObstacleLF(Q_Train) =  # error: This variable is undefined.
CP_FlocBaffleLF(Q_Train) :=
    CP_FlocObstacleLF(Q_Train)*(1 + N_FlocObstaclesLF(Q_Train)) if Q_Train ≤ Q_PlantMaxLF
    "null" otherwise
CP_FlocBaffleLF(Q_Train) =  # error
CP_FlocChannelLF(Q_Train) :=
    (1 + fN_FlocBafflesPerChannelLF(Q_Train))*CP_FlocBaffleLF(Q_Train) if Q_Train ≤ Q_PlantMaxLF
    "null" otherwise
CP_FlocChannelLF(Q_Train) =  # error
fN_FlocChannelsLF(Q_Train) :=
    Ceil(CP_Floc/CP_FlocChannelLF(Q_Train) - 1, 2) + 1 if Q_Train ≤ Q_PlantMaxLF
    "null" otherwise  # odd number of channels so that the last channel ends entering the sed tank.
N_FlocChannelsLF := fN_FlocChannelsLF(Q_Train)
L_FlocEst :=
    ((fN_FlocChannelsLF(Q_Train) - 1)*W_FlocChannelLF) + (fN_FlocChannelsLF(Q_Train) - 1)*T_FlocChannelWall + W_FlocChannelLast if Q_Train ≤ Q_PlantMaxLF
    "null" otherwise
W_FlocChannelLF :=
    W_FlocChannelLF + (L_Sed - L_FlocEst)/(N_FlocChannelsLF - 1) if Q_Train ≤ Q_PlantMaxLF
    "null" otherwise  # This makes sure that the length of the flocculator is the same length as the sed tank
L_FlocLF :=
    ((fN_FlocChannelsLF(Q_Train) - 1)*W_FlocChannelLF) + (fN_FlocChannelsLF(Q_Train) - 1)*T_FlocChannelWall + W_FlocChannelLast if Q_Train ≤ Q_PlantMaxLF
    "null" otherwise
N_FlocBafflesLF :=
    N_FlocChannelsLF*N_FlocBafflesPerChannelLF if Q_Train ≤ Q_PlantMaxLF
    "null" otherwise
fN_FlocChannelSpacesLF(Q_Train) := fN_FlocBafflesPerChannelLF(Q_Train) + 1
S_FlocBaffleLF :=
    if Q_Train ≤ Q_PlantMaxLF
        for i ∈ 0 .. N_FlocChannelsLF - 1
            S[i] ← S_FlocLF(Q_Train)
        S
    "null" otherwise
N_FlocChannelSpacesLF :=
    if Q_Train ≤ Q_PlantMaxLF
        for i ∈ 0 .. N_FlocChannelsLF - 1
            N_Spaces[i] ← fN_FlocChannelSpacesLF(Q_Train) - ((Q_Train ≤ Q_PlantMaxLF) == 0)*(i == (N_FlocChannelsV - 1))*(ceil((W_SedInletChannelPreWeir + S_FlocPortGap)/S_FlocV) - (mod(ceil((W_SedInletChannelPreWeir + S_FlocPortGap)/S_FlocV), 2) == 0))
        N_Spaces
    "null" otherwise
N_FlocChannelBafflesLF :=
    N_FlocChannelSpacesLF - 1 if Q_Train ≤ Q_PlantMaxLF
    "null" otherwise
Ψ_FlocLF(Q_Train) := fN_FlocChannelsLF(Q_Train)*CP_FlocChannelLF(Q_Train)
fN_FlocChannelSpacesLF(Q_Train) - ((N_SedTanks == 1 and N_SedBays == 1) == 0)*(1 == (N_FlocChannelsV - 1))*(ceil((W_SedInletChannelPreWeir + S_FlocPortGap)/S_FlocV) - (mod(ceil((W_SedInletChannelPreWeir + S_FlocPortGap)/S_FlocV), 2) == 0)) =  # error
fL_FlocActiveLF(Q_Train) :=
    fN_FlocChannelsLF(Q_Train)*W_FlocChannel(Q_Train) if Q_Train ≤ Q_PlantMaxLF
    "null" otherwise  # This is the length of the floc tank (not including the dimensions of the channel walls)
fh_eFlocLF(Q_Train) :=
    fN_FlocChannelsLF(Q_Train)*(1 + fN_FlocBafflesPerChannelLF(Q_Train))*(1 + N_FlocObstaclesLF(Q_Train))*K_FlocBaffle*(Q_Train/(S_FlocLF(Q_Train)*W_FlocChannel(Q_Train)))^2/(2*g) if Q_Train ≤ Q_PlantMaxLF
    "null" otherwise
Q_Graph := 1*L/s, 2*L/s .. 6*L/s
h_eFlocLF := fh_eFlocLF(Q_Train)
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h_eFlocLFBaffle :=
    h_eFlocLF/(N_FlocBafflesLF + N_FlocObstaclesLF(Q_Train)*fN_FlocChannelSpacesLF(Q_Train)*fN_FlocChannelsLF(Q_Train)) if Q_Train ≤ Q_PlantMaxLF
    "null" otherwise
L_FlocBafflesUpperLF(ED_FlocBod, Q_Train, W_FlocChannel, L_FlocChannel, T_FlocBaffle, H_Floc, Pi_Baffle) := H_FlocWallsVF(ED_FlocBod, Q_Train, W_FlocChannel, L_FlocChannel, T_FlocBaffle, H_Floc) - Pi_Baffle*S_FlocLF(Q_Train) - 0.5*H_PlantFreeboard  # error: This value must be a scalar.
L_FlocBafflesLowerLF(ED_FlocBod, Q_Train, W_FlocChannel, L_FlocChannel, T_FlocBaffle, H_Floc, Pi_Baffle) := max(Z_SedWeirExit - S_FlocLF(Q_Train), H_Floc - Pi_Baffle*S_FlocLF(Q_Train))
N_FlocBafflesUpperLF(Q_Train) := (fN_FlocChannelSpacesLF(Q_Train)/2 - 1)*fN_FlocChannelsLF(Q_Train)
N_FlocBafflesLowerLF(Q_Train) := fN_FlocChannelSpacesLF(Q_Train)/2*fN_FlocChannelsLF(Q_Train) - 1
L_FlocBafflesTotalLF(ED_FlocBod, Q_Train, W_FlocChannel, L_FlocChannel, T_FlocBaffle, H_Floc, Pi_Baffle) := N_FlocBafflesUpperLF(Q_Train)*L_FlocBafflesUpperLF(ED_FlocBod, Q_Train, W_FlocChannel, L_FlocChannel, T_FlocBaffle, H_Floc, Pi_Baffle) + N_FlocBafflesLowerLF(Q_Train)*L_FlocBafflesLowerLF(ED_FlocBod, Q_Train, W_FlocChannel, L_FlocChannel, T_FlocBaffle, H_Floc, Pi_Baffle)
# Assign correct variables based on horiz/vert/lowflow
N_FlocChannels :=
    N_FlocChannelsLF if Q_Train ≤ Q_PlantMaxLF
    N_FlocChannelsV if EN_FlocHoriz == 0 and Q_Train > Q_PlantMaxLF
    N_FlocChannelsH otherwise
W_FlocChannel :=
    W_FlocChannelLF if Q_Train ≤ Q_PlantMaxLF
    W_FlocChannelV if EN_FlocHoriz == 0 and Q_Train > Q_PlantMaxLF
    W_FlocChannelH otherwise
S_FlocBaffle :=
    S_FlocBaffleLF if Q_Train ≤ Q_PlantMaxLF
    S_FlocBaffleV if EN_FlocHoriz == 0 and Q_Train > Q_PlantMaxLF
    S_FlocBaffleH otherwise
S_FlocBaffleFirst := S_FlocBaffle[0]
H_Floc :=
    H_Sed + h_eFlocLF if Q_Train ≤ Q_PlantMaxLF
    H_FlocWallsVF(ED_Floc, Q_Train, W_FlocChannelV, L_Sed, T_FlocBaffle, HW_FlocEnd) if EN_FlocHoriz == 0 and Q_Train > Q_PlantMaxLF
    HL_FlocH + HW_FlocEnd + H_PlantFreeboard otherwise
HL_Floc :=
    h_eFlocLF if Q_Train ≤ Q_PlantMaxLF
    h_eFlocV if EN_FlocHoriz == 0 and Q_Train > Q_PlantMaxLF
    HL_FlocH otherwise
HL_FlocBaffle :=
    h_eFlocLFBaffle if Q_Train ≤ Q_PlantMaxLF
    h_eBaffleV if EN_FlocHoriz == 0 and Q_Train > Q_PlantMaxLF
    HL_FlocBaffleH otherwise
N_FlocChannelBaffles :=
    N_FlocChannelBafflesLF if Q_Train ≤ Q_PlantMaxLF
    N_FlocChannelBafflesV if EN_FlocHoriz == 0 and Q_Train > Q_PlantMaxLF
    N_FlocChannelBafflesH otherwise
B_FlocBaffle := S_FlocBaffle + T_FlocBaffle
T_FlocChannelWall :=
    T_Acrylic if Q_Train ≤ Q_PlantMaxLF
    T_PlantWall otherwise
    = 0.15 m
S_FlocPortGap :=
    S_FlocBaffleSetBackPlastic if EN_FlocHoriz == 0
    0 m otherwise
    = 0.02 m
H_FlocPort :=
    for i ∈ 0 .. N_FlocChannels - 1
        H_Port[i] ←
            (Pi_FlocBaffle*S_FlocV*W_FlocChannel/(S_FlocV - S_FlocPortGap)) if EN_FlocHoriz == 0
            H_Floc otherwise
    return H_Port
W_FlocPort :=
    for i ∈ 0 .. N_FlocChannels - 2
        W_Port[i] ← S_FlocBaffle[0] - S_FlocPortGap
    W_Port[N_FlocChannels - 1] ← W_SedInletChannelPreWeir
    return W_Port
## Position calculations for each baffle
# Now we need to assign positions, lengths and elevations to floc baffles
L_Floc :=
    W_FlocTankLF if Q_Train ≤ Q_PlantMaxLF
    L_Sed otherwise
# For horizontal the baffles are side to side instead of upper and lower, but we just kept those names for consistency. The lengths are the same on both sides. Since we kept J.FlocChannel the same for last channel too (as opposed to modifiying it in the case of slightly different spacing) we can just subtract the baffle spacing in the first channel (this is the length that the water flows around beyond the baffle). Look at a plant drawing if this doensn't make sense.
W_Floc :=
    L_FlocLF if Q_Train ≤ Q_PlantMaxLF
    (N_FlocChannels*W_FlocChannel) + ((N_FlocChannels - 1)*T_PlantWall) otherwise
HW_FlocEnd = 1.71486 m
HW_FlocStart := H_Floc - H_PlantFreeboard
L_FlocBaffleLower :=
    W_FlocChannel - S_FlocBaffle[0] if EN_FlocHoriz == 1 and Q_Train > Q_PlantMaxLF
    L_FlocBafflesLowerLF(ED_Floc, Q_Train, W_FlocChannelLF, W_FlocTankLF, T_FlocBaffle, HW_FlocEnd, Pi_FlocBaffle) if Q_Train ≤ Q_PlantMaxLF
    L_FlocBafflesLowerVF(ED_Floc, Q_Train, W_FlocChannel, L_Sed, T_FlocBaffle, HW_FlocEnd, Pi_FlocBaffle) otherwise
# Assign generic variables based on horizontal or vertical
L_FlocBaffleUpper :=
    W_FlocChannel - S_FlocBaffle[0] if EN_FlocHoriz == 1 and Q_Train > Q_PlantMaxLF
    L_FlocBafflesUpperLF(ED_Floc, Q_Train, W_FlocChannelLF, W_FlocTankLF, T_FlocBaffle, HW_FlocStart, Pi_FlocBaffle) if Q_Train ≤ Q_PlantMaxLF
    L_FlocBafflesUpperVF(ED_Floc, Q_Train, W_FlocChannel, L_Sed, T_FlocBaffle, HW_FlocEnd, Pi_FlocBaffle) otherwise
N_FlocBaffleLower :=
    for i ∈ 0 .. N_FlocChannels - 1
        N_FlocBaffleLowerV[i] ← floor((N_FlocChannelBaffles[i] + 1)/2)
    return N_FlocBaffleLowerV
# Calculate the number of lower baffles per channel as an array
N_FlocBaffleLowerTotal := sum(N_FlocBaffleLower)  # Calculate the total number of lower baffles
N_FlocBaffleUpper :=
    for i ∈ 0 .. N_FlocChannels - 1
        N_FlocBaffleUpperV[i] ← (N_FlocChannelBaffles[i] - N_FlocBaffleLower)[i]
    return N_FlocBaffleUpperV
# Subtract the total number of  lower baffles in a channel from the total number of baffles in that channel to find the number of upper baffles as an array for each channel.
N_FlocBaffleUpperTotal := sum(N_FlocBaffleUpper)  # Calculate the total number of upper baffles
N_FlocBaffleLowerTotal + N_FlocBaffleUpperTotal + N_FlocChannels =  # error
L_Slot :=
    L_Slot ← T_ConcreteMin if EN_FlocBaffle == 0 and EN_FlocHoriz == 0
    L_Slot ← 0 m otherwise  # If the flocculator is vertical with rigid baffles, slots in the channel walls are needed to hold them in place.
W_FlocBaffle :=
    W_FlocChannel + 2*L_Slot if EN_FlocHoriz == 0
    H_Floc otherwise
# If there is a slot, the width of the baffle needs to be wider than the channel to fit into the slot. Since there are slots at each end, it is wider by twice the length of the slot.
N_FlocChannels =  # error  # B is the center to center distance between baffles whereas S was the distance without any thicknesses included.
# The first and last spacing are defined so that they can be returned to the builder.
N_FlocChannelBaffles =  # error
# X.FlocBaffles creates an array for all of the "x" positions of the baffles. The x direction goes in the direction of the longer length of the flocculator channels.
X_FlocBaffles :=
    for channel ∈ 0 .. N_FlocChannels - 2
        for i ∈ 0 .. N_FlocChannelBaffles[channel] - 1
            x[i, channel] ← S_FlocBaffle[channel] + B_FlocBaffle[channel]*i
    for i ∈ 0 .. N_FlocChannelBaffles[N_FlocChannels - 1] - 1
        x[i, N_FlocChannels - 1] ← B_FlocBaffle[N_FlocChannels - 1]*i + (L_Floc - B_FlocBaffle[N_FlocChannels - 1]*N_FlocChannelBaffles[N_FlocChannels - 1])
    return x
# if the spacing between baffles is less than the sum of the inlet channel and the "lip" between ports and the nearest baffle, at least one baffle will be in the midst of the inlet channel (or too close to it). In this case, respace the baffles using the remaining length (Length of the sed tank - width of the inlet channel - "lip"). The remaining space should be divided by the number of calculated spaces -1 because one baffle would be aligned with the edge of the remaining space (not dividing it up into 2 spaces). if the spacing is not such that at least one baffle will be in the midst of the inlet channel, space normally.
Y_FlocBafflesH :=
    if EN_FlocHoriz == 1
        if mod(N_FlocChannels, 2) == 0
            for i ∈ 0 .. (N_FlocChannels - 1)
                for j ∈ 0 .. N_FlocChannelBaffles[i] - 1
                    Y_FlocBaffles[j, i] ← (Plant_Origin[1] + (N_SedTanks*(W_Sed + T_PlantWall)) + ((N_FlocChannels - i - 1)*(W_FlocChannel + T_PlantWall))) + mod(j, 2)*S_FlocBaffle[0] if mod(i, 2) == 1
                    Y_FlocBaffles[j, i] ← (Plant_Origin[1] + (N_SedTanks*(W_Sed + T_PlantWall)) + ((N_FlocChannels - i - 1)*(W_FlocChannel + T_PlantWall))) + mod(j + 1, 2)*S_FlocBaffle[0] otherwise
            Y_FlocBaffles[j, i]
        otherwise
            for i ∈ 0 .. (N_FlocChannels - 1)
                for j ∈ 0 .. N_FlocChannelBaffles[i] - 1
                    Y_FlocBaffles[j, i] ← (Plant_Origin[1] + (N_SedTanks*(W_Sed + T_PlantWall)) + ((N_FlocChannels - i - 1)*(W_FlocChannel + T_PlantWall))) + mod(j, 2)*S_FlocBaffle[0] if mod(i + 1, 2) == 1
                    Y_FlocBaffles[j, i] ← (Plant_Origin[1] + (N_SedTanks*(W_Sed + T_PlantWall)) + ((N_FlocChannels - i - 1)*(W_FlocChannel + T_PlantWall))) + mod(j + 1, 2)*S_FlocBaffle[0] otherwise
            Y_FlocBaffles[j, i]
    return Y_FlocBaffles
# S.FlocBaffle0 should be used because if the last channel is respaced it screws up how it is drawn so that there is a little gap between the bafflle and the edge of the channel.
# Even number of floc channels causes the entrance tank to switch sides
# Odd number of floc channels
Y_FlocBafflesV :=
    if EN_FlocHoriz == 0
        for j ∈ 0 .. (N_FlocChannels - 1)
            Y_FlocBaffles[0, j] ← Plant_Origin[1] + (N_SedTanks*(W_Sed + T_SedWallDivider)) + T_PlantWall - T_SedWallDivider + ((N_FlocChannels - j - 1)*(W_FlocChannel + T_FlocChannelWall))
    return Y_FlocBaffles
# The y position of the baffles is the same within each channel for vertical. Again, draw it out to understand the code.
Y_FlocBafflesLF :=
    if EN_FlocHoriz == 0
        for j ∈ 0 .. (N_FlocChannels - 1)
            Y_FlocBaffles[0, j] ← Plant_Origin[1] + (N_SedTanks*(W_Sed + T_PlantWall)) + W_FlocChannelLast + ((N_FlocChannels - j - 1)*(W_FlocChannel + T_FlocChannelWall))
    return Y_FlocBaffles
Y_FlocBaffles :=
    Y_FlocBaffles ← Y_FlocBafflesH if EN_FlocHoriz == 1
    Y_FlocBaffles ← Y_FlocBafflesLF if Q_Train ≤ Q_PlantMaxLF
    Y_FlocBaffles ← Y_FlocBafflesV otherwise
Channels := 0 .. N_FlocChannels - 1
Z_FlocBafflesH :=
    if EN_FlocHoriz == 1
        for channel ∈ Channels
            for i ∈ 0 .. N_FlocChannelBaffles[channel] - 1
                z[i, channel] ← 0 m
    return z  # Z array is the elevation of the bottom of the baffle. For horizontal, all baffles are at the same elevation.
Channelsnew := 0 .. N_FlocChannels - 2
Z_FlocBafflesV :=
    if EN_FlocHoriz == 0
        for channel ∈ Channelsnew
            for i ∈ 0 .. N_FlocChannelBaffles[channel] - 1
                z[i, channel] ← mod(i, 2)*S_FlocBaffle[channel]*Pi_FlocBaffle
        for i ∈ 0 .. N_FlocChannelBaffles[N_FlocChannels - 1] - 1
            z[i, N_FlocChannels - 1] ← mod(i + 1, 2)*S_FlocBaffle[channel]*Pi_FlocBaffle
    return z
# For vertical, every other baffle is raised. The last channel is slightly different to maintain the flow pattern.
N_FlocChannelBaffles[N_FlocChannels - 1] - 1 =  # error
Z_FlocBafflesLF :=
    if EN_FlocHoriz == 0
        for channel ∈ 0 .. N_FlocChannels - 1
            for i ∈ 0 .. N_FlocChannelBaffles[channel] - 1
                z[i, channel] ← mod(i, 2)*S_FlocBaffle[channel]*Pi_FlocBaffle
    return z
Z_FlocBaffles :=
    Z_FlocBaffles ← Z_FlocBafflesH if EN_FlocHoriz == 1
    Z_FlocBaffles ← Z_FlocBafflesLF if Q_Train ≤ Q_PlantMaxLF
    Z_FlocBaffles ← Z_FlocBafflesV otherwise
L_FlocBafflesH :=
    if EN_FlocHoriz == 1
        for channel ∈ Channels
            for i ∈ 0 .. N_FlocChannelBaffles[channel] - 1
                l[i, channel] ← L_FlocBaffleLower
    return l  # L array is the length of the baffles
# The lengths of all the baffles are the same for horizontal
L_FlocBafflesV :=
    if EN_FlocHoriz == 0
        for channel ∈ Channels
            for i ∈ 0 .. N_FlocChannelBaffles[channel] - 1
                l[i, channel] ← L_FlocBaffleUpper if mod(i, 2) == 1
                l[i, channel] ← L_FlocBaffleLower otherwise
        for i ∈ 0 .. N_FlocChannelBaffles[last(N_FlocChannelBaffles)] - 1
            l[i, N_FlocChannels - 1] ← L_FlocBaffleLower if mod(i, 2) == 1
            l[i, N_FlocChannels - 1] ← L_FlocBaffleUpper otherwise
    return l  # For vertical, the lengths of the upper baffles are different from the lower baffles.
# For the last channel, the length of the
# baffles needed to be changed since the
# up/down had been adjusted.
L_FlocBaffles :=
    L_FlocBaffles ← L_FlocBafflesH if EN_FlocHoriz == 1
    L_FlocBaffles ← L_FlocBafflesV otherwise
L_FlocWithWalls := L_Sed + 2*T_PlantWall = 9.22351 m
W_FlocWithWalls := W_FlocChannel*N_FlocChannels + T_PlantWall*N_FlocChannels
# W.FlocWithWalls Doesnt include wall shared with sed tank because that is accounted for in sed tank.
# Z.FlocTank is the elevation of the flocculator with respect to the bottom of the sed tank.
Z_FlocTank := HW_Sed - HW_FlocEnd = 0.15 m
# Calculate the length and width of the flocculator including the walls for easy construction (values are returned to user).
HW_FlocStart := H_Floc - H_PlantFreeboard
HW_FlocChannel := (HW_FlocStart + HW_FlocEnd)/2
# Assign and Calculate Final Parameters
# Pipe Spacer Size
OD_PipeSpacerEstF := [FloorNearest(.6*W_FlocChannel, Pipesizes[:, 1]); CeilNearest(.6*W_FlocChannel, Pipesizes[:, 1])]
OD_PipeSpacerEstC := CeilNearest(.6*W_FlocChannel, Pipesizes[:, 1])
Index :=
    for i ∈ 0 .. 1
        I[i] ← index(OD_PipeSpacerEstF[i], Pipesizes[:, 1])
        Avail ← CountryPipes[I[i], Country]
        if Avail == 0
            while Avail == 0
                I[i] ← I[i] + 1
                Avail ← CountryPipes[I[i], Country]
    return I
ND_SpacerPipeArray := [Pipesizes[Index[0], 0]; Pipesizes[Index[1], 0]]
OD_PipeSpacer := [outerdiameter(ND_SpacerPipeArray[0]); outerdiameter(ND_SpacerPipeArray[1])]
A_Percentage := OD_PipeSpacer/W_FlocChannel
ND_SpacerPipeLF :=
    ND_SpacerPipeArray[index(RoundNearest(.6, A_Percentage), A_Percentage)] if Q_Train ≤ Q_PlantMaxLF
    0.75 in otherwise
ND_SpacerPipe :=
    ND_SpacerPipe if Q_Train > Q_PlantMaxLF
    ND_SpacerPipeLF otherwise
# Number and Spacing of Obstacles
S_OverLap := L_FlocBaffles[0, 0] - Z_FlocBaffles[1, 0]
S_Obstacle := (S_OverLap - outerdiameter(ND_SpacerPipe)*N_FlocObstaclesLF(Q_Train))/(N_FlocObstaclesLF(Q_Train) + 1)
V_FlocLF := Q_Train/(S_FlocBaffle[0]*W_FlocChannel - outerdiameter(ND_SpacerPipe)*S_FlocBaffle[0])
V_Floc :=
    V_FlocV if EN_FlocHoriz == 0
    V_FlocLF if Q_Train ≤ Q_PlantMaxLF
    V_FlocH otherwise
# use this last term to estimate the volume taken up by the module piping
Vol_FlocFirstChannelsV := (N_FlocChannels - 2)*W_FlocPort*H_FlocPort*T_PlantWall + (W_FlocChannelV*L_Sed*((2*HW_FlocEnd + HL_Floc)/2) - (T_FlocBaffle*W_FlocChannel*(N_FlocBaffleLower[0]*L_FlocBaffleLower + N_FlocBaffleUpper[0]*L_FlocBaffleUpper)) - ConRadius(ND_FlocModulesMain)^2*π*L_Sed*6)*(N_FlocChannels - 1)
Vol_FlocLastChannelV := (W_FlocPort*H_FlocPort*T_PlantWall + W_FlocChannelV*L_Sed*((2*HW_FlocEnd + HL_Floc)/2) - (T_FlocBaffle*W_FlocChannel*(N_FlocBaffleLower[N_FlocChannels - 1]*L_FlocBaffleLower + N_FlocBaffleUpper[N_FlocChannels - 1]*L_FlocBaffleUpper)) - ConRadius(ND_FlocModulesMain)^2*π*L_Sed*6)
Vol_FlocV := Vol_FlocFirstChannelsV + Vol_FlocLastChannelV
Vol_FlocH := (W_FlocChannelH*L_Sed*(HW_FlocEnd + HL_FlocH/2))*N_FlocChannels - sum(N_FlocChannelBaffles)*T_FlocBaffle*L_FlocBaffles[0, 0]*W_FlocBaffle + W_FlocPort*H_FlocPort*T_PlantWall*(N_FlocChannels - 1)
Vol_FlocLF := H_FlocLF*W_FlocTankLF*fN_FlocChannelsLF(Q_Train)*W_FlocChannel - (outerdiameter(ND_SpacerPipe)^2*π/4*W_FlocTankLF*N_FlocObstaclesLF(Q_Train)*fN_FlocChannelsLF(Q_Train))
Vol_Floc :=
    Vol_FlocV if EN_FlocHoriz == 0
    Vol_FlocLF if Q_Train ≤ Q_PlantMaxLF
    Vol_FlocH otherwise
G_Floc := sqrt(HL_Floc*Q_Train*g/(Nu_Water*Vol_Floc))
Ti_FlocH := Vol_FlocH/Q_Train
Ti_FlocLF := Vol_FlocLF/Q_Train
Ti_Floc :=
    Ti_FlocV if EN_FlocHoriz == 0 and Q_Train > Q_PlantMaxLF
    Ti_FlocLF if Q_Train ≤ Q_PlantMaxLF
    Ti_FlocH otherwise
ED_FlocAveH := K_FlocBaffle*V_Floc^3/(2*W_FlocChannel)
ED_FlocAve := g*HL_Floc/Ti_Floc
ED_FlocMaxLF :=
    g*h_eFlocLF/(Vol_FlocLF/Q_Train) if Q_Train ≤ Q_PlantMaxLF
    "null" otherwise
ED_FlocMax :=
    ED_FlocMaxV if EN_FlocHoriz == 0 and Q_Train > Q_PlantMaxLF
    ED_FlocMaxLF if Q_Train ≤ Q_PlantMaxLF
    ED_FlocMaxH otherwise
CP_FlocActual :=
    Ψ_FlocV if EN_FlocHoriz == 0 and Q_Train > Q_PlantMaxLF
    Ψ_FlocLF(Q_Train) if Q_Train ≤ Q_PlantMaxLF
    Ψ_FlocH otherwise
## Drain Calculations (Vertical)
# This is a program to calculate how much time is required to drain out a flocculator section. Each section of the flocculator is connected to one another with alternating holes on the bottom of the baffles. These holes are small enough not to disrupt flow over the baffles and big enough such that one drain will empty out all the sections.
# Initially, the tank is full. This is denoted at time=t(0).
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# Once the tanks start draining, at time=t(1) all the water is level.
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# At time=t(2), section 1 has begun to drain quicker than sections 2, 3 & 4.
# Each hole on the bottom of the baffles is treated as an orifice.
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# available valve diameters
ND_Valvem := [0.0508; 0.0762; 0.1016; 0.127; 0.1524; 0.1778; 0.2032]*m
Q_minor(K_minor, D, h1, h2) :=
    Q ← (π*D^2/4*sqrt(2*g*(h1 - h2)/K_minor)) if h1 - h2 > 0
    Q ← 0*m^3/s otherwise
# Base and width are defined as the base and width of a single channel
# We need to calculate 'n' different h values plus an extra 'h'
# which would be the value emptied from tank 1. The tanks are
# numbered from 1 to n
# There will only be n-1 different flows out from each tank
# . | .
t_masterV(base, width, D_Valve, K_Valve, h_initial, H_LowerBaffle, n_tanks) :=
    time ← (sqrt(h_initial) - sqrt(H_LowerBaffle))/((π*D_Valve^2/(8*n_tanks*base*width))*sqrt(2*g/K_Valve))
    Δt ← base*width*H_LowerBaffle/(Q_minor(K_Valve, D_Valve, H_LowerBaffle, 0 m)*100)
    for i ∈ 0 .. n_tanks
        h_tank[i] ← H_LowerBaffle
    h_tank[0] ← 0 m
    while h_tank[n_tanks, 0] > 1 mm
        time ← time + Δt
        for i ∈ 0 .. n_tanks
            Q[i] ← Q_minor(K_Valve, D_Valve, h_tank[i + 1], h_tank[i]) if i < n_tanks
            Q[i] ← 0*m^3/s otherwise
            h_tank[i] ← h_tank[i] + (Q[i] - Q[i - 1])*Δt/(base*width) if i > 0
            h_tank[i] ← 0 m otherwise
    return time  # initial guess for time based on the total number of tanks in each channel
# delta t is based on the height of the lower baffle in the first channel
# Solution path to get port area and valve diameter
# Find area of ports assuming all including valve are same area.
# Try solution with valve one size smaller
# find required port area
# If that doesn't work, then increase valve size
# find required port area
# These equations are from integration of the flow out of a tank with changing depth
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# If the valve is the flow limiter, the relationship is linear
# think about making this more generic?
# also exists in another form in pipe database
# The following function returns a port size based on allowable valve sizes
ND_FlocValveF(desiredT) :=
    tankDrainTime ← 100 hr
    i ← 0
    ND_Valve ← 0 m
    N_tanks ←
        N_FlocChannelBaffles[0] if N_FlocChannels > 2
        floor(N_FlocChannelBaffles[0]/2) otherwise
    ND_ValveStart ← NominalDiameter(sqrt(sqrt((HW_FlocEnd + HW_FlocStart)/2)/((π*desiredT/(8*L_Sed*2*(T_PlantWall + W_FlocChannel)))*sqrt(2*g/(K_GateValve + K_Exp)))), PS_Default)
    if EN_FlocHoriz == 0
        ND_Valve ← ND_Valvem[last(ND_Valvem)] if desiredT ≤ t_masterV(2*S_FlocBaffle[0], W_FlocChannel, innerdiameter(ND_Valvem[last(ND_Valvem)], PS_Default), K_GateValve + K_Exp, HW_FlocChannel, L_FlocBaffleLower, N_tanks)
        i ← index(ND_ValveStart, ND_Valvem)
        while i < rows(ND_Valvem) and ND_Valve == 0 m
            tankDrainTime ← t_masterV(2*S_FlocBaffle[0], W_FlocChannel, innerdiameter(ND_Valvem[last(ND_Valvem)], PS_Default), K_GateValve + K_Exp, HW_FlocChannel, L_FlocBaffleLower, N_tanks)
            ND_Valve ← ND_Valvem[i] if tankDrainTime < desiredT
            i ← i + 1 otherwise
            ND_Valve
    ND_Valve ← ND_ValveStart otherwise
    ND_Valve
# For vertical, the tank being drained is modeled as a series of tanks corresponding to the number of spaces between lower baffles in two channels (since valves are every other channel)
# Accounts for the case where there is only two channels and there will be a valve in both; divides the number of tanks by 2 in that case
# In the event the desired drain time cannot eb acheived by the alrgest valve size, the valve size is assigned to be the largest size
# For horizontal, calculates the ideal diameter then finds the next highest allowable diameter.  Assigns the largest valve size if the guess is larger than that.
ND_FlocValveLF(desiredT) :=
    tankDrainTime ← 100 hr
    i ← 0
    ND_Valve ← 0 m
    N_tanks ← N_FlocChannels
    ND_ValveStart ← NominalDiameter(sqrt(sqrt((HW_FlocEnd + HW_FlocStart)/2)/((π*desiredT/(8*L_Floc*N_FlocChannels*(T_FlocChannelWall + W_FlocChannel)))*sqrt(2*g/(K_GateValve + K_Exp)))), PS_Default)
    if EN_FlocHoriz == 0
        ND_Valve ← ND_Valvem[last(ND_Valvem)] if desiredT ≤ t_masterV(2*S_FlocBaffle[0], W_FlocChannel, innerdiameter(ND_Valvem[last(ND_Valvem)], PS_Default), K_GateValve + K_Exp, HW_FlocChannel, L_FlocBaffleLower, N_tanks)
        i ← index(ND_ValveStart, ND_Valvem)
        while i < rows(ND_Valvem) and ND_Valve == 0 m
            tankDrainTime ← t_masterV(2*S_FlocBaffle[0], W_FlocChannel, innerdiameter(ND_Valvem[last(ND_Valvem)], PS_Default), K_GateValve + K_Exp, HW_FlocChannel, L_FlocBaffleLower, N_tanks)
            ND_Valve ← ND_Valvem[i] if tankDrainTime < desiredT
            i ← i + 1 otherwise
            ND_Valve
    ND_Valve ← ND_ValveStart otherwise
    ND_Valve
ND_FlocValve :=
    ND_FlocValveLF(Ti_FlocDrain) if Q_Train ≤ Q_PlantMaxLF
    ND_FlocValveF(Ti_FlocDrain) otherwise
D_FlocValve := 2*outerradius(ND_FlocValve)
H_FlocSlope := D_FlocValve/2
# Uses the nominal diameter of the valve to find the actual diameter (outer diameter of the  threaded side of the coupling/inner diameter of valve).  This is used to draw the drains more accurately.D FlocValve ends up being the ID of the valve and the OD of the coupling.
L_BafflePort := sqrt(π/4*D_FlocValve^2)
D_FlocScale := D_FlocValve/(1.16 m)  # Scaling factor needed for insertion.  This is based on how the block is saved
# Assupmtions:
# The Flocculator can be assumed as one straight channel rather than wrapping back and forth
# The port size is calculated for the time to drain 2 channels, since there is a valve on at least every other channel
# The volume of each "tank" (space between baffles) is equal
# The size of a port is equal to the size of the valve
# The minor loss through the port is the same as the minor loss through the valve (K.Exp + K.GateValve)
# Drain Valve Position Calcs for Vertical Flocculator
Y_FlocDrainValves :=
    for i ∈ 0 .. ceil(N_FlocChannels/2) - 1
        y[i] ← Plant_Origin[1] + N_SedTanks*(W_Sed + T_SedWallDivider) + 0.5*W_FlocChannel + 2*(W_FlocChannel + T_FlocChannelWall)*i
    y
# Makes Drain vales a vector even if there is only 1 valve to make drawing easier
Y_FlocDrainValves =  # error
N_FlocValves := length(Y_FlocDrainValves)
# Starts calculating from the side closer tot he sed tank and moves towards the entrance tank.  Places the valve in the center of each channel so that the center of each valve is at-grade.
# Floc Tank Baffle Modules
EN_ModuleIdentical :=
    1 if 2*H_Floc - H_PlantFreeboard - L_FlocBaffleUpper - L_FlocBaffleLower ≤ 40 cm
    0 otherwise
# if the non-overlapping length of the modules are 40cm or less, all module pipes may be identical in the z-direction.
# ensure at least 4 baffles per long module if module pipes are not identical
L_FlocModuleMin :=
    max(4*B_FlocBaffle, 65 cm) if EN_ModuleIdentical == 0
    (65 cm) otherwise
# As soon as SFlocBaffle is greater than 45cm then you can use concrete. Check if En.FlocBaffle=1 which tells you that its a vertical flocculator
# FlocModuleMin is a prelimary perameter to allow for further calculations. It is the min length that the users will be able to handle of the module.
EN_FlocBaffle =  # error
# L.FlocModuleTarget compares the lengths of the L.FlocModuleMing and two times the Baffles spacing to give you a length that will have a least 2 baffles per module
L_FlocModuleTarget := max(L_FlocModuleMin, S_FlocBaffle[last(S_FlocBaffle)])
# want a minimum of 2 baffles per module, meaning it needs to be at least as large as a space between baffles
B_FlocBaffle =  # error
S_FlocBaffle =  # error
EN_FlocHoriz = 0
ModuleProperties :=
    for i ∈ 0 .. last(N_FlocChannelBaffles)
        N_FlocBafflesLong[i] ← max(2*floor((L_FlocModuleTarget/B_FlocBaffle[i] + 1)/2), 1)
        N_FlocLongModule[i] ← floor(N_FlocChannelBaffles[i]/N_FlocBafflesLong[i])
        N_FlocBafflesShort[i] ← N_FlocChannelBaffles[i] - N_FlocBafflesLong[i]*N_FlocLongModule[i]
    return [N_FlocBafflesLong, N_FlocLongModule, N_FlocBafflesShort]
# The modules properties loop:  goes through all the baffles in the channel to first calculate the number of baffles in each long baffle, then the number of long modules, then the number of baffles per short module.
# The number of baffles in each long module is found by dividing the Floc Module target length by two times the baffle spacing(since we want even pairs) and then flooring this to get rid of the remainder. This number will then be multiplied by 2 to get the total number of baffles. This will go through each channel of the floc tank.
# Using the values above, we can find  the total number of modules per channel. Since we know the total number of baffles per channel, we can find the the amount of long modules will be in each channel by dividing the total number of Floc Channel Baffles by Floc baffles long and flooring this, to get rid of the remainder.
# After this, we are able to find the total number of baffles in the short module found at the end of the channel. Since we got rid of the remainders, we have to take these numbers into account by putting these extra baffles into the short module.The total number of baffles in each channel are substracted by the product of N.Flocbaffleslongand NflocLongModule.
# This code returns number of baffles in the long module, number of long modules per channel in tank, and the number of baffles in the short module in each channel
# 6/25/12 - changed the N.FlocBafflesLong[i calculation to include a max function; this prevents the denominator for the final value for N.FlocLongModule from going to zero. As this only happens for high flow rates when the flocculator will be horizontal and modules are not necessary, this will not affect the final design at all, but simply avoids undefined values that will prevent AC.FlocTank from being defined for high flow rates.
ModuleProperties =  # error
N_FlocChannelBafflesLong := ModuleProperties[0, 0]
# Number of baffles in the long module
N_FlocChannelModulesLong := ModuleProperties[0, 1]  # Number of long modules per channel  in tank
# Number of baffles in the short module in each channel
N_FlocChannelBafflesShort := ModuleProperties[0, 2]
# True length of Module
# Since the size of the target module length changes due to the cap depths, the true length of the module needs to be calculated
# Calculates the socket depth of a 1/2 diameter cap
# L.ModuleLong: goes through the all the baffles in each long module and adds on the socket depth and subtracts a cap thickness. It substracts one baffle spacing due to the geometery of the connections. Returns the length of the true length of the long modules.
L_FlocModuleLong :=
    for i ∈ 0 .. last(N_FlocChannelBafflesLong)
        L_ModuleLong[i] ← (N_FlocChannelBafflesLong[i] - 1)*B_FlocBaffle[i] + SocketDepth(ND_FlocModulesMain) - CapThickness(ND_FlocModulesMain)
    return L_ModuleLong
# True for middle  pipe baffles don't overlap enough
L_FlocModuleLongOuter :=
    for i ∈ 0 .. last(N_FlocChannelBafflesLong)
        L_ModuleLong[i] ← (N_FlocChannelBafflesLong[i] - 2)*B_FlocBaffle[i] + SocketDepth(ND_FlocModulesMain) - CapThickness(ND_FlocModulesMain)
    return L_ModuleLong
# Cap thickness of a 1/2 inch diameter cap using the outer radius and cap diameter given in the pipe database
# L.ModuleShort: Goes through the baffles in a short module.
# If the there are no short modules, the code returns that the length is 0. If there are baffles, it multiplies the baffle spacing with the number of baffles in the short module and adds  the socket depth and substracts teh capthickness.
L_FlocModuleShort :=
    for i ∈ 0 .. last(N_FlocChannelBafflesShort)
        ModuleLengthShort[i] ← 0 if N_FlocChannelBafflesShort[i] == 0
        ModuleLengthShort[i] ← X_FlocBaffles[0, 0] - CapThickness(ND_FlocModulesMain) if N_FlocChannelBafflesShort[i] == 1
        ModuleLengthShort[i] ← B_FlocBaffle[i]*(N_FlocChannelBafflesShort[i] - 1) + SocketDepth(ND_FlocModulesMain) - CapThickness(ND_FlocModulesMain) otherwise
    return ModuleLengthShort
# True for the middle, lower, and upper pipe when baffles don't overlap enough
L_FlocModuleShort =  # error
# Coupling thicknessgiven by the the cap diameter and the outer radius of cap of 1.5inches found in the pipe database
# The length of the connector pipe is calculated by subtracting the coupling length plus the socket depth(both of 1/5inch diameter caps) and minus the capthickcouple from the baffle spacing.
L_FlocModuleConnector :=
    for i ∈ 0 .. N_FlocChannels - 1
        L_Connector[i] ← S_FlocBaffle[i] - CouplingLength(1/2*in) + SocketDepth(1/2*in) - CapThickness(1.5 in)
    L_Connector
# This is the length of the last module pipe
# True for the middle pipe when baffles don't overlap enough
L_FlocModuleConnectorOuter :=
    for i ∈ 0 .. N_FlocChannels - 1
        L_Connector[i] ← 2*S_FlocBaffle[i] + T_FlocBaffle - CouplingLength(1/2*in) + SocketDepth(1/2*in) - CapThickness(1.5 in)
    L_Connector
S_ModulePipesH :=
    for i ∈ 0 .. N_FlocChannels - 1
        S[i] ← N_FlocChannelBafflesLong[i]*B_FlocBaffle[i]
    S
# The length of the module spacing is calculated by the baffle thickness plus the small cap plus the big cap plus the connector pipe length plus the coupling length minus the socket depth plus the floc baffle spacing.
S_ModulePipesV := (L_FlocBaffleLower - S_FlocBaffle[last(S_FlocBaffle)]*Pi_FlocBaffle)/4
