Q_Plant := 20*L/s
# [reference: EtFlocSedFi.xmcd]
Q_Plant :=
    Q_Train if EN_DoubleTrain == 1
    Q_Plant otherwise
# design at half flow rate for plants which are "double train" i.e. over 100Lps. this applies to the sed tank, flocculator and lfom files, in the entrance tank file this returns to the design flow and then goes back to half for the srsf.
# CFD results and functions
CFD_Constant := 2
Pi_VCBaffle := 1/(sqrt(K_FlocBaffle) + 1) = 0.387426
Q_Transition := ED_Floc^(1/3)*W_HumanMin*(1.6 m)^(4/3)*Pi_JetPlane^3/(K_FlocBaffle^(1/3)*Pi_VCBaffle^2) = 10.1445 L/s
Pi_JSGraph := 2 .. 40  # Used to create the graphs
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# This is the efficiency of the geometry
α_ψ(Pi_JS) := min((4*Pi_JetPlane^3/(Pi_VCBaffle^2*K_FlocBaffle))^(1/6), (4/Pi_JS)^(1/6))
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α_ε(Pi_JS) := max(2, Pi_JetPlane^3/Pi_VenaContractaOrifice^4*2/K_FlocBaffle*Pi_JS)
# Changed the jet max energy dissipation rate coefficient from 0.34 to 0.38 to better match CFD results. This needs further verification by PIV, literature on plane jets, or CFD.
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ψ_P(J, S) := α_ψ(J/S)*J^(2/3)*(K_FlocBaffle/2)^(1/3)
# Generic
# Ρ
# S
# J
# Vertical
# Width
# Space
# Height
# Horizontal
# Height
# Space
# Width
S_FlocBaffleMin := W_HumanMin = 0.45 m
J(P, S) := P*S
J_Min := J(Pi_JSOptimal, S_FlocBaffleMin) = 1.35 m
H_MaxHorizontal(Q, S, Pi_JS, ED, J) := Q/(S*(J*2*ED/(K_FlocBaffle*α_ε(Pi_JS)))^(1/3))
Q_Plant = 0.02 m^3/s
Pi_JSOptimal = 3
S_FlocBaffleMin = 0.45 m
ED_Floc = 0.01 m^2/s^3
H_MaxHorizontal(Q_Plant, S_FlocBaffleMin, Pi_JSOptimal, ED_Floc, J_Min) = 0.25333 m
HW_FlocEndEst :=
    HW_Sed if H_FlocOption == 0
    H_MaxHorizontal(Q_Plant, S_FlocBaffleMin, Pi_JSOptimal, ED_Floc, J_Min) if H_FlocOption == -1
    H_FlocOption*m if H_FlocOption > 0
    = 1.85523 m
# This gives the number of spaces per channel for a horizontal flocculator. Floor to ensure minimum spacing constraint met for horizontal. Subtracting 1 forces it to be odd. Add one before flooring though to get more accurate estimate.
N_FlocSpacesFH(L, T, S) := (Floor((L + T)/(S + T) + 1, 2) - 1)
SofN_FlocBaffleF(L, T, N_Spaces) := (L + T)/N_Spaces - T  # This calculates the spacing between baffles given a number of spaces in a channel.
S_FlocBaffleNonIterative(Q, P, Pi_JS, ED) := (Q/P)^(3/4)*(1/Pi_JS)^(1/4)*(K_FlocBaffle*α_ε(Pi_JS)/(2*ED))^(1/4)
# This equation can be used to find the space between baffles when everything else is known.
S_FlocBaffleCalcH := SofN_FlocBaffleF(L_Sed, T_FlocBaffleRigidH, N_FlocSpacesFH(L_Sed, T_FlocBaffleRigidH, S_FlocBaffleNonIterative(Q_Plant, HW_FlocEndEst, Pi_JSOptimal, ED_Floc))) = 0.11334 m
HW_FlocEnd :=
    H_MaxHorizontal(Q_Plant, S_FlocBaffleCalcH, Pi_JSOptimal, ED_Floc, J(Pi_JSOptimal, S_FlocBaffleCalcH)) if H_FlocOption == -1
    HW_FlocEndEst otherwise
    = 1.85523 m
Q_MinHorizontal(P, S, Pi_JS, ED, J) := P*S*(J*2*ED/(K_FlocBaffle*α_ε(Pi_JS)))^(1/3)
Q_MinHorizontal(HW_FlocEnd, S_FlocBaffleMin, Pi_JSOptimal, ED_Floc, J_Min) = 146.467 L/s
EN_FlocHoriz :=
    EN_FlocHoriz ← 1 if Q_Plant ≥ Q_MinHorizontal(HW_FlocEnd, S_FlocBaffleMin, Pi_JSOptimal, ED_Floc, J_Min) and H_FlocOption > -1
    EN_FlocHoriz ← 1 if H_FlocOption == -1
    EN_FlocHoriz ← 0 otherwise
# recursive function | For vertical, you have to iterate to find the spacing.
S_FlocBaffleIterative(Q, W, J, S, ED) := (K_FlocBaffle*α_ε(J/S)/(2*J*ED))^(1/3)*Q/W
# Monroe put this in to make a later step more clear for vertical. It's just a rearrangement of the above equation.
W_FlocChannelV(Q, J, S, ED) := (K_FlocBaffle*α_ε(J/S)/(2*J*ED))^(1/3)*Q/S
W_FlocChannelMinRigidBaffleV := W_FlocChannelV(Q_Plant, HW_FlocEnd, S_FlocBaffleMin, ED_Floc)
W_FlocChannelPlasticBaffleV := max(0.5*W_Plastic, S_FlocBaffleMin)
# removing the option for cement baffles for vert
T_FlocBaffle :=
    T_FlocBaffleRigidH if EN_FlocHoriz == 1
    T_SedPlate otherwise
T_FlocBaffleRigidV if (EN_FlocHoriz == 0) and (W_FlocChannelMinRigidBaffleV > W_FlocChannelPlasticBaffleV)
T_FlocChannelWall :=
    T_FlocBaffleRigidV if Q_Plant ≤ Q_PlantMaxLF
    T_FlocChannelWallMidFlow otherwise
    = 0.15 m
EN_FlocBaffle :=
    EN_FlocBaffle ← 0 if EN_FlocHoriz == 1
    EN_FlocBaffle ← 1 otherwise
# 1 means plastic baffles
# 0 means ferrocement baffles
S_FlocPortGap :=
    T_ConcreteMin if (EN_FlocBaffle == 0) and (EN_FlocHoriz == 0)
    S_FlocBaffleSetBackPlastic if (EN_FlocBaffle == 1) and (EN_FlocHoriz == 0)
    (0 m) otherwise
    = 0.02 m
# Cost Optimization Functions for Vertical Flocculators
# does not take into account use of ferrocement baffles!
T_Slab := 25 cm
Cost_UnitConcrete := 150*USD/yd^3 = 196.193 base_currency/m^3
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Cost_UnitBaffle := 360/19*USD/(12 ft) = 5.18027 base_currency/m
Cost_UnitWall := 950/19*USD/m^2 = 50 base_currency/m^2
Cost_UnitSlab := (575 + 700)/19*USD/m^2
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S_FlocEstVF(ED_FlocBod, Q_Plant, W_FlocChannel, H_Floc) := max((K_FlocBaffle/(ED_FlocBod*H_Floc))^(1/3)*Q_Plant/W_FlocChannel, 1/(ED_FlocBod^(1/4)*Pi_VCBaffle)*(Pi_JetPlane*Q_Plant/W_FlocChannel)^(3/4))
N_FlocChannelSpacesVF(ED_FlocBod, Q_Plant, W_FlocChannel, L_FlocChannel, T_FlocBaffle, H_Floc) := Floor((L_FlocChannel + T_FlocBaffle)/(S_FlocEstVF(ED_FlocBod, Q_Plant, W_FlocChannel, H_Floc) + T_FlocBaffle), 2)
S_FlocVF(ED_FlocBod, Q_Plant, W_FlocChannel, L_FlocChannel, T_FlocBaffle, H_Floc) := (L_FlocChannel + T_FlocBaffle - N_FlocChannelSpacesVF(ED_FlocBod, Q_Plant, W_FlocChannel, L_FlocChannel, T_FlocBaffle, H_Floc)*T_FlocBaffle)/N_FlocChannelSpacesVF(ED_FlocBod, Q_Plant, W_FlocChannel, L_FlocChannel, T_FlocBaffle, H_Floc)
Ψ_BaffleVF(ED_FlocBod, Q_Plant, W_FlocChannel, L_FlocChannel, T_FlocBaffle, H_Floc) := min((S_FlocVF(ED_FlocBod, Q_Plant, W_FlocChannel, L_FlocChannel, T_FlocBaffle, H_Floc)*K_FlocBaffle/H_Floc)^(1/6), (Pi_JetPlane^3/Pi_VCBaffle^4)^(1/6))*(CFD_Constant^(1/6)*(K_FlocBaffle/2)^(1/3)*H_Floc^(2/3))
N_FlocChannelsVF(ED_FlocBod, Q_Plant, W_FlocChannel, L_FlocChannel, T_FlocBaffle, H_Floc) := Ceil(CP_Floc/(N_FlocChannelSpacesVF(ED_FlocBod, Q_Plant, W_FlocChannel, L_FlocChannel, T_FlocBaffle, H_Floc)*Ψ_BaffleVF(ED_FlocBod, Q_Plant, W_FlocChannel, L_FlocChannel, T_FlocBaffle, H_Floc)), 2)
N_FlocSpacesVF(ED_FlocBod, Q_Plant, W_FlocChannel, L_FlocChannel, T_FlocBaffle, H_Floc) := N_FlocChannelsVF(ED_FlocBod, Q_Plant, W_FlocChannel, L_FlocChannel, T_FlocBaffle, H_Floc)*N_FlocChannelSpacesVF(ED_FlocBod, Q_Plant, W_FlocChannel, L_FlocChannel, T_FlocBaffle, H_Floc) - 1
Ψ_FlocVF(ED_FlocBod, Q_Plant, W_FlocChannel, L_FlocChannel, T_FlocBaffle, H_Floc) := Ψ_BaffleVF(ED_FlocBod, Q_Plant, W_FlocChannel, L_FlocChannel, T_FlocBaffle, H_Floc)*N_FlocSpacesVF(ED_FlocBod, Q_Plant, W_FlocChannel, L_FlocChannel, T_FlocBaffle, H_Floc)
V_FlocVF(ED_FlocBod, Q_Plant, W_FlocChannel, L_FlocChannel, T_FlocBaffle, H_Floc) := Q_Plant/(S_FlocVF(ED_FlocBod, Q_Plant, W_FlocChannel, L_FlocChannel, T_FlocBaffle, H_Floc)*W_FlocChannel)
α_εVF(ED_FlocBod, Q_Plant, W_FlocChannel, L_FlocChannel, T_FlocBaffle, H_Floc) := max(2, Pi_JetPlane^3/Pi_VCBaffle^4*2*H_Floc/(K_FlocBaffle*S_FlocVF(ED_FlocBod, Q_Plant, W_FlocChannel, L_FlocChannel, T_FlocBaffle, H_Floc)))
ED_FlocMaxVF(ED_FlocBod, Q_Plant, W_FlocChannel, L_FlocChannel, T_FlocBaffle, H_Floc) := α_εVF(ED_FlocBod, Q_Plant, W_FlocChannel, L_FlocChannel, T_FlocBaffle, H_Floc)*K_FlocBaffle*(V_FlocVF(ED_FlocBod, Q_Plant, W_FlocChannel, L_FlocChannel, T_FlocBaffle, H_Floc)^3/(2*H_Floc))
h_eBaffleVF(ED_FlocBod, Q_Plant, W_FlocChannel, L_FlocChannel, T_FlocBaffle, H_Floc) := K_FlocBaffle*V_FlocVF(ED_FlocBod, Q_Plant, W_FlocChannel, L_FlocChannel, T_FlocBaffle, H_Floc)^2/(2*g)
h_eFlocVF(ED_FlocBod, Q_Plant, W_FlocChannel, L_FlocChannel, T_FlocBaffle, H_Floc) := h_eBaffleVF(ED_FlocBod, Q_Plant, W_FlocChannel, L_FlocChannel, T_FlocBaffle, H_Floc)*N_FlocSpacesVF(ED_FlocBod, Q_Plant, W_FlocChannel, L_FlocChannel, T_FlocBaffle, H_Floc)
Vol_FlocVF(ED_FlocBod, Q_Plant, W_FlocChannel, L_FlocChannel, T_FlocBaffle, H_Floc) := W_FlocChannel*N_FlocChannelsVF(ED_FlocBod, Q_Plant, W_FlocChannel, L_FlocChannel, T_FlocBaffle, H_Floc)*L_FlocChannel*(H_Floc + h_eFlocVF(ED_FlocBod, Q_Plant, W_FlocChannel, L_FlocChannel, T_FlocBaffle, H_Floc)/2)
Ti_FlocVF(ED_FlocBod, Q_Plant, W_FlocChannel, L_FlocChannel, T_FlocBaffle, H_Floc) := Vol_FlocVF(ED_FlocBod, Q_Plant, W_FlocChannel, L_FlocChannel, T_FlocBaffle, H_Floc)/Q_Plant
H_FlocWallsVF(ED_FlocBod, Q_Plant, W_FlocChannel, L_FlocChannel, T_FlocBaffle, H_Floc) := H_Floc + h_eFlocVF(ED_FlocBod, Q_Plant, W_FlocChannel, L_FlocChannel, T_FlocBaffle, H_Floc) + H_PlantFreeboard
A_WallsVF(ED_FlocBod, Q_Plant, W_FlocChannel, L_FlocChannel, T_FlocBaffle, H_Floc) := (L_FlocChannel + 2*W_FlocChannel + 2*T_PlantWall)*H_FlocWallsVF(ED_FlocBod, Q_Plant, W_FlocChannel, L_FlocChannel, T_FlocBaffle, H_Floc)*N_FlocChannelsVF(ED_FlocBod, Q_Plant, W_FlocChannel, L_FlocChannel, T_FlocBaffle, H_Floc)
Vol_WallsVF(ED_FlocBod, Q_Plant, W_FlocChannel, L_FlocChannel, T_FlocBaffle, H_Floc) := (L_FlocChannel + 2*W_FlocChannel + 2*T_PlantWall)*H_FlocWallsVF(ED_FlocBod, Q_Plant, W_FlocChannel, L_FlocChannel, T_FlocBaffle, H_Floc)*N_FlocChannelsVF(ED_FlocBod, Q_Plant, W_FlocChannel, L_FlocChannel, T_FlocBaffle, H_Floc)*T_PlantWall
A_SlabVF(ED_FlocBod, Q_Plant, W_FlocChannel, L_FlocChannel, T_FlocBaffle, H_Floc) := (L_FlocChannel + 2*T_PlantWall)*(W_FlocChannel + T_PlantWall)*N_FlocChannelsVF(ED_FlocBod, Q_Plant, W_FlocChannel, L_FlocChannel, T_FlocBaffle, H_Floc)
Vol_SlabVF(ED_FlocBod, Q_Plant, W_FlocChannel, L_FlocChannel, T_FlocBaffle, H_Floc) := (L_FlocChannel + 2*T_PlantWall)*(W_FlocChannel + T_PlantWall)*N_FlocChannelsVF(ED_FlocBod, Q_Plant, W_FlocChannel, L_FlocChannel, T_FlocBaffle, H_Floc)*T_Slab
Vol_WallVF(ED_FlocBod, Q_Plant, W_FlocChannel, L_FlocChannel, T_FlocBaffle, H_Floc) := Vol_WallsVF(ED_FlocBod, Q_Plant, W_FlocChannel, L_FlocChannel, T_FlocBaffle, H_Floc) + Vol_SlabVF(ED_FlocBod, Q_Plant, W_FlocChannel, L_FlocChannel, T_FlocBaffle, H_Floc)
Cost_SlabVF(ED_FlocBod, Q_Plant, W_FlocChannel, L_FlocChannel, T_FlocBaffle, H_Floc) := Cost_UnitSlab*A_SlabVF(ED_FlocBod, Q_Plant, W_FlocChannel, L_FlocChannel, T_FlocBaffle, H_Floc)
Cost_WallVF(ED_FlocBod, Q_Plant, W_FlocChannel, L_FlocChannel, T_FlocBaffle, H_Floc) := Cost_UnitWall*A_WallsVF(ED_FlocBod, Q_Plant, W_FlocChannel, L_FlocChannel, T_FlocBaffle, H_Floc)
Cost_WallSlabVF(ED_FlocBod, Q_Plant, W_FlocChannel, L_FlocChannel, T_FlocBaffle, H_Floc) := Cost_WallVF(ED_FlocBod, Q_Plant, W_FlocChannel, L_FlocChannel, T_FlocBaffle, H_Floc) + Cost_SlabVF(ED_FlocBod, Q_Plant, W_FlocChannel, L_FlocChannel, T_FlocBaffle, H_Floc)
# Baffle Material Costs:
L_FlocBafflesUpperVF(ED_FlocBod, Q_Plant, W_FlocChannel, L_FlocChannel, T_FlocBaffle, H_Floc, Pi_Baffle) := H_FlocWallsVF(ED_FlocBod, Q_Plant, W_FlocChannel, L_FlocChannel, T_FlocBaffle, H_Floc) - Pi_Baffle*S_FlocVF(ED_FlocBod, Q_Plant, W_FlocChannel, L_FlocChannel, T_FlocBaffle, H_Floc) - 0.5*H_PlantFreeboard
L_FlocBafflesLowerVF(ED_FlocBod, Q_Plant, W_FlocChannel, L_FlocChannel, T_FlocBaffle, H_Floc, Pi_Baffle) := min(Z_SedWeirExit - S_FlocVF(ED_FlocBod, Q_Plant, W_FlocChannel, L_FlocChannel, T_FlocBaffle, H_Floc), H_Floc - Pi_Baffle*S_FlocVF(ED_FlocBod, Q_Plant, W_FlocChannel, L_FlocChannel, T_FlocBaffle, H_Floc))
N_FlocBafflesUpperVF(ED_FlocBod, Q_Plant, W_FlocChannel, L_FlocChannel, T_FlocBaffle, H_Floc) := (N_FlocChannelSpacesVF(ED_FlocBod, Q_Plant, W_FlocChannel, L_FlocChannel, T_FlocBaffle, H_Floc)/2 - 1)*N_FlocChannelsVF(ED_FlocBod, Q_Plant, W_FlocChannel, L_FlocChannel, T_FlocBaffle, H_Floc)
N_FlocBafflesLowerVF(ED_FlocBod, Q_Plant, W_FlocChannel, L_FlocChannel, T_FlocBaffle, H_Floc) := N_FlocChannelSpacesVF(ED_FlocBod, Q_Plant, W_FlocChannel, L_FlocChannel, T_FlocBaffle, H_Floc)/2*N_FlocChannelsVF(ED_FlocBod, Q_Plant, W_FlocChannel, L_FlocChannel, T_FlocBaffle, H_Floc) - 1
L_FlocBafflesTotalVF(ED_FlocBod, Q_Plant, W_FlocChannel, L_FlocChannel, T_FlocBaffle, H_Floc, Pi_Baffle) := N_FlocBafflesUpperVF(ED_FlocBod, Q_Plant, W_FlocChannel, L_FlocChannel, T_FlocBaffle, H_Floc)*L_FlocBafflesUpperVF(ED_FlocBod, Q_Plant, W_FlocChannel, L_FlocChannel, T_FlocBaffle, H_Floc, Pi_Baffle) + N_FlocBafflesLowerVF(ED_FlocBod, Q_Plant, W_FlocChannel, L_FlocChannel, T_FlocBaffle, H_Floc)*L_FlocBafflesLowerVF(ED_FlocBod, Q_Plant, W_FlocChannel, L_FlocChannel, T_FlocBaffle, H_Floc, Pi_Baffle)
Cost_BafflesVF(ED_FlocBod, Q_Plant, W_FlocChannel, L_FlocChannel, T_FlocBaffle, H_Floc, Pi_Baffle) := Cost_UnitBaffle*L_FlocBafflesTotalVF(ED_FlocBod, Q_Plant, W_FlocChannel, L_FlocChannel, T_FlocBaffle, H_Floc, Pi_Baffle)
Cost_FlocVF(ED_FlocBod, Q_Plant, W_FlocChannel, L_FlocChannel, T_FlocBaffle, H_Floc, Pi_Baffle) := Cost_WallSlabVF(ED_FlocBod, Q_Plant, W_FlocChannel, L_FlocChannel, T_FlocBaffle, H_Floc) + Cost_BafflesVF(ED_FlocBod, Q_Plant, W_FlocChannel, L_FlocChannel, T_FlocBaffle, H_Floc, Pi_Baffle)
# Vertical Flocculator Dimensions
S_BaffleOverlapMax := (-2*ConRadius(ND_FlocModulesLarge) + HW_FlocEnd)/(2*Pi_FlocBaffleMin)
# really need to know the flocculator height to know the needed overlap, so just adding H.PlantFreeboard and hope it works...
W_FlocChannelMin := max(W_HumanMin, (K_FlocBaffle/(ED_Floc*HW_FlocEnd))^(1/3)*Q_Plant/S_BaffleOverlapMax)
W_FlocChannelMax := W_SedPlate
W_FlocChannelVF(ED_FlocBod, Q_Plant, L_FlocChannel, T_FlocBaffle, H_Floc, Pi_FlocBaffleMin) :=
    for i ∈ 0 .. max(W_FlocChannelMax - W_FlocChannelMin, 0)/cm
        W_FlocArray[i] ← W_FlocChannelMin + i*cm
        Cost_FlocArray[i] ← Cost_FlocVF(ED_FlocBod, Q_Plant, W_FlocArray[i], L_FlocChannel, T_FlocBaffle, H_Floc, Pi_FlocBaffleMin)
    MinCost ← min(Cost_FlocArray)
    Index ← match(min(Cost_FlocArray), Cost_FlocArray)
    W_FlocBest ← W_FlocArray[match(min(Cost_FlocArray), Cost_FlocArray)[0]]
    return W_FlocBest
# 6/25/12 - changed the last index calculation to be a max of zero and the difference between the max and min floc channel width to avoid negative values for high flow rates. As this will only occur at high flow rates when a horizontal flocculator will be drawn, this does not affect the final design, but simply avoids undefined values that will cause AC.FlocTank to be undefined at high flow rates.
# assume min pi.flocbaffle...should be ok since baffle material costs don't dominate
W_FlocChannelV := W_FlocChannelVF(ED_Floc, Q_Plant, L_Sed, T_FlocBaffle, HW_FlocEnd, Pi_FlocBaffleMin) = 0.45 m
S_FlocV := S_FlocVF(ED_Floc, Q_Plant, W_FlocChannelV, L_Sed, T_FlocBaffle, HW_FlocEnd) = 0.26546 m
N_FlocChannelsV := N_FlocChannelsVF(ED_Floc, Q_Plant, W_FlocChannelV, L_Sed, T_FlocBaffle, HW_FlocEnd) = 2
S_FlocBaffleV :=
    for i ∈ 0 .. N_FlocChannelsV - 1
        S[i] ← S_FlocV
    S
N_FlocChannelSpacesV :=
    for i ∈ 0 .. N_FlocChannelsV - 1
        N_Spaces[i] ← N_FlocChannelSpacesVF(ED_Floc, Q_Plant, W_FlocChannelV, L_Sed, T_FlocBaffle, HW_FlocEnd) - ((Q_Plant ≤ Q_PlantMaxLF) == 0)*(i == (N_FlocChannelsV - 1))*(ceil((W_SedInletChannelPreWeir + S_FlocPortGap)/S_FlocV) - (mod(ceil((W_SedInletChannelPreWeir + S_FlocPortGap)/S_FlocV), 2) == 0))
    N_Spaces
    = [28; 27]
N_FlocChannelBafflesV := N_FlocChannelSpacesV - 1 = [27; 26]
V_FlocV := V_FlocVF(ED_Floc, Q_Plant, W_FlocChannelV, L_Sed, T_FlocBaffle, HW_FlocEnd) = 0.167425 m/s
h_eBaffleV := h_eBaffleVF(ED_Floc, Q_Plant, W_FlocChannelV, L_Sed, T_FlocBaffle, HW_FlocEnd) = 0.00357295 m
h_eFlocV := h_eFlocVF(ED_Floc, Q_Plant, W_FlocChannelV, L_Sed, T_FlocBaffle, HW_FlocEnd) = 0.196512 m
Pi_FlocBaffle := min(Pi_FlocBaffleMax, (HW_FlocEnd - 2*ConRadius(ND_FlocModulesLarge))/(2*S_FlocV))
ED_FlocMaxV := ED_FlocMaxVF(ED_Floc, Q_Plant, W_FlocChannelV, L_Sed, T_FlocBaffle, HW_FlocEnd) = 8.93824 mW/kg
ED_FlocAveV := K_FlocBaffle*V_FlocVF(ED_Floc, Q_Plant, W_FlocChannelV, L_Sed, T_FlocBaffle, HW_FlocEnd)^3/(2*HW_FlocEnd) = 3.16206 mW/kg
ED_FlocAveV := g*h_eFlocVF(ED_Floc, Q_Plant, W_FlocChannelV, L_Sed, T_FlocBaffle, HW_FlocEnd)/Ti_FlocVF(ED_Floc, Q_Plant, W_FlocChannelV, L_Sed, T_FlocBaffle, HW_FlocEnd) = 2.92812 mW/kg
Ψ_BaffleV := Ψ_BaffleVF(ED_Floc, Q_Plant, W_FlocChannelV, L_Sed, T_FlocBaffle, HW_FlocEnd) = 1.53814 m^(2/3)
Ψ_FlocV := Ψ_FlocVF(ED_Floc, Q_Plant, W_FlocChannelV, L_Sed, T_FlocBaffle, HW_FlocEnd) = 84.5978 m^(2/3)
Ti_FlocV := Ti_FlocVF(ED_Floc, Q_Plant, W_FlocChannelV, L_Sed, T_FlocBaffle, HW_FlocEnd) = 658.146 s
# Horizontal Flocculator Dimensions
W_FlocChannelEstH := S_FlocBaffleCalcH*Pi_JSOptimal = 0.340021 m
ψ_SpaceH := ψ_P(W_FlocChannelEstH, S_FlocBaffleCalcH) = 0.36928 m^(2/3)  # Defines the collision potential per space in a horizontal flocculator.
N_FlocChannelSpacesTotalH := ceil(CP_Floc/ψ_SpaceH) = 204  # Calculates the total number of spaces needed to achieve target energy dissipation
N_FlocSpacesPerChannelH := N_FlocSpacesFH(L_Sed, T_FlocBaffleRigidH, S_FlocBaffleCalcH) = 27
# Determines the number of channels needed based on the number of spaces per channel and the total number of spaces.
N_FlocChannelsH :=
    ceil(N_FlocChannelSpacesTotalH/N_FlocSpacesPerChannelH) if mod(ceil(N_FlocChannelSpacesTotalH/N_FlocSpacesPerChannelH), 2) == 0
    (ceil(N_FlocChannelSpacesTotalH/N_FlocSpacesPerChannelH) + 1) otherwise
N_FlocChannelSpacesH :=
    for i ∈ 0 .. N_FlocChannelsH - 1
        Spaces[i] ← N_FlocSpacesPerChannelH - (i == (N_FlocChannelsH - 1))*Ceil(W_SedInletChannelPreWeir/S_FlocBaffleCalcH, 2)
    return Spaces
N_FlocChannelBafflesH := N_FlocChannelSpacesH - 1
S_FlocBaffleH :=
    for i ∈ 0 .. N_FlocChannelsH - 1
        Local[i] ← SofN_FlocBaffleF(L_Sed, T_FlocBaffleRigidH, N_FlocChannelSpacesH[0])
    return Local
W_FlocChannelH := S_FlocBaffleH[0]*Pi_JSOptimal
HL_FlocBaffleH := K_FlocBaffle*Q_Plant^2/(2*g*(S_FlocBaffleH[0]*HW_FlocEnd)^2)  # Head loss per floc baffle in horiz flocculator
N_FlocSpacesTotalH := sum(N_FlocChannelSpacesH)
HL_FlocH := HL_FlocBaffleH*N_FlocSpacesTotalH = 0.177946 m
# Parameters:
V_FlocH := Q_Plant/((HW_FlocEnd + HL_FlocH/2)*S_FlocBaffleH[0])
Ψ_BaffleH := min((S_FlocBaffleH*K_FlocBaffle/W_FlocChannelH)^(1/6), (Pi_JetPlane^3/Pi_VCBaffle^4)^(1/6))*(CFD_Constant^(1/6)*(K_FlocBaffle/2)^(1/3)*W_FlocChannelH^(2/3))
Ψ_FlocH := Ψ_BaffleH*N_FlocSpacesTotalH
α_εH := max(2, Pi_JetPlane^3/Pi_VCBaffle^4*2*W_FlocChannelH/(K_FlocBaffle*S_FlocBaffleH))
ED_FlocMaxH := α_εH*K_FlocBaffle*(V_FlocH^3/(2*HW_FlocEnd + HL_FlocH)) = 0.597051 mW/kg
# Low Flow Flocculator Dimensions
H_FlocLF := HW_Sed = 1.85523 m
T_FlocBaffleRigidV = 0.05 m
Π_HS := 5
W_FlocTankLF := W_HumanMin
fS_FlocLF(Q_Plant) := (K_FlocBaffle*Q_Plant^3/(Π_HS*ED_Floc))^(1/7)
fN_FlocBafflesPerChannelLF(Q_Plant) := Round(W_FlocTankLF/fS_FlocLF(Q_Plant), 2) - 1
N_FlocBafflesPerChannelLF := fN_FlocBafflesPerChannelLF(Q_Plant) = 1
S_FlocLF(Q_Plant) := W_FlocTankLF/(fN_FlocBafflesPerChannelLF(Q_Plant) + 1)
N_FlocObstaclesLF(Q_Plant) :=
    ceil(H_FlocLF/(S_FlocLF(Q_Plant)*Π_HS)) - 1 if Q_Plant ≤ Q_PlantMaxLF
    "null" otherwise
# Number of Obstacles
W_FlocChannel(Q_Plant) :=
    Q_Plant/S_FlocLF(Q_Plant)*(K_FlocBaffle/((H_FlocLF - 2*Pi_FlocBaffle*S_FlocLF(Q_Plant) + H_PlantFreeboard)/(N_FlocObstaclesLF(Q_Plant) + 1)*ED_Floc))^(1/3) if Q_Plant ≤ Q_PlantMaxLF
    "null" otherwise  # H is really the distance between obstacles.
W_FlocChannelLF := W_FlocChannel(Q_Plant) = "null" cm  # This is the spacing between the ferrocement baffles
W_FlocChannelLast := outerdiameter(ND_SedManifold) + 2*S_Fitting = 0.319075 m
# Based on LFOM diameters for different flow rates
# We need to provide obstacles to create more energy dissipation in the vertical path between baffles because otherwise teh H/S ratio is too large. We can do this by connecting the plastic baffles with 1/2" PVC pipe and stringing larger diameter PVC pipe over the 1/2" PVC pipe as spacers and obstacles.
CP_FlocObstacleLF(Q_Plant) :=
    ψ_P((H_FlocLF - 2*Pi_FlocBaffle*S_FlocLF(Q_Plant) + H_PlantFreeboard)/(N_FlocObstaclesLF(Q_Plant) + 1), S_FlocLF(Q_Plant)) if Q_Plant ≤ Q_PlantMaxLF
    "null" otherwise
CP_FlocObstacleLF(Q_Plant) = "null"
CP_FlocBaffleLF(Q_Plant) :=
    CP_FlocObstacleLF(Q_Plant)*(1 + N_FlocObstaclesLF(Q_Plant)) if Q_Plant ≤ Q_PlantMaxLF
    "null" otherwise
CP_FlocBaffleLF(Q_Plant) = "null"
CP_FlocChannelLF(Q_Plant) :=
    (1 + fN_FlocBafflesPerChannelLF(Q_Plant))*CP_FlocBaffleLF(Q_Plant) if Q_Plant ≤ Q_PlantMaxLF
    "null" otherwise
CP_FlocChannelLF(Q_Plant) = "null"
fN_FlocChannelsLF(Q_Plant) :=
    Ceil(CP_Floc/CP_FlocChannelLF(Q_Plant) - 1, 2) + 1 if Q_Plant ≤ Q_PlantMaxLF
    "null" otherwise  # odd number of channels so that the last channel ends entering the sed tank.
N_FlocChannelsLF := fN_FlocChannelsLF(Q_Plant) = "null"
L_FlocEst :=
    ((fN_FlocChannelsLF(Q_Plant) - 1)*W_FlocChannelLF) + (fN_FlocChannelsLF(Q_Plant) - 1)*T_FlocChannelWall + W_FlocChannelLast if Q_Plant ≤ Q_PlantMaxLF
    "null" otherwise
    = "null"
W_FlocChannelLF :=
    W_FlocChannelLF + (L_Sed - L_FlocEst)/(N_FlocChannelsLF - 1) if Q_Plant ≤ Q_PlantMaxLF
    "null" otherwise
    = "null"  # This makes sure that the length of the flocculator is the same length as the sed tank
L_FlocLF :=
    ((fN_FlocChannelsLF(Q_Plant) - 1)*W_FlocChannelLF) + (fN_FlocChannelsLF(Q_Plant) - 1)*T_FlocChannelWall + W_FlocChannelLast if Q_Plant ≤ Q_PlantMaxLF
    "null" otherwise
    = "null"
N_FlocBafflesLF :=
    N_FlocChannelsLF*N_FlocBafflesPerChannelLF if Q_Plant ≤ Q_PlantMaxLF
    "null" otherwise
fN_FlocChannelSpacesLF(Q_Plant) := fN_FlocBafflesPerChannelLF(Q_Plant) + 1
S_FlocBaffleLF :=
    if Q_Plant ≤ Q_PlantMaxLF
        for i ∈ 0 .. N_FlocChannelsLF - 1
            S[i] ← S_FlocLF(Q_Plant)
        S
    "null" otherwise
N_FlocChannelSpacesLF :=
    if Q_Plant ≤ Q_PlantMaxLF
        for i ∈ 0 .. N_FlocChannelsLF - 1
            N_Spaces[i] ← fN_FlocChannelSpacesLF(Q_Plant) - ((Q_Plant ≤ Q_PlantMaxLF) == 0)*(i == (N_FlocChannelsV - 1))*(ceil((W_SedInletChannelPreWeir + S_FlocPortGap)/S_FlocV) - (mod(ceil((W_SedInletChannelPreWeir + S_FlocPortGap)/S_FlocV), 2) == 0))
        N_Spaces
    "null" otherwise
N_FlocChannelBafflesLF :=
    N_FlocChannelSpacesLF - 1 if Q_Plant ≤ Q_PlantMaxLF
    "null" otherwise
Ψ_FlocLF(Q_Plant) := fN_FlocChannelsLF(Q_Plant)*CP_FlocChannelLF(Q_Plant)
fN_FlocChannelSpacesLF(Q_Plant) - ((N_SedTanks == 1 and N_SedBays == 1) == 0)*(1 == (N_FlocChannelsV - 1))*(ceil((W_SedInletChannelPreWeir + S_FlocPortGap)/S_FlocV) - (mod(ceil((W_SedInletChannelPreWeir + S_FlocPortGap)/S_FlocV), 2) == 0)) = 1
fL_FlocActiveLF(Q_Plant) :=
    fN_FlocChannelsLF(Q_Plant)*W_FlocChannel(Q_Plant) if Q_Plant ≤ Q_PlantMaxLF
    "null" otherwise  # This is the length of the floc tank (not including the dimensions of the channel walls)
fh_eFlocLF(Q_Plant) :=
    fN_FlocChannelsLF(Q_Plant)*(1 + fN_FlocBafflesPerChannelLF(Q_Plant))*(1 + N_FlocObstaclesLF(Q_Plant))*K_FlocBaffle*(Q_Plant/(S_FlocLF(Q_Plant)*W_FlocChannel(Q_Plant)))^2/(2*g) if Q_Plant ≤ Q_PlantMaxLF
    "null" otherwise
Q_Graph := 1*L/s, 2*L/s .. 6*L/s
h_eFlocLF := fh_eFlocLF(Q_Plant) = "null"
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h_eFlocLFBaffle :=
    h_eFlocLF/(N_FlocBafflesLF + N_FlocObstaclesLF(Q_Plant)*fN_FlocChannelSpacesLF(Q_Plant)*fN_FlocChannelsLF(Q_Plant)) if Q_Plant ≤ Q_PlantMaxLF
    "null" otherwise
    = "null" cm
L_FlocBafflesUpperLF(ED_FlocBod, Q_Plant, W_FlocChannel, L_FlocChannel, T_FlocBaffle, H_Floc, Pi_Baffle) := H_FlocWallsVF(ED_FlocBod, Q_Plant, W_FlocChannel, L_FlocChannel, T_FlocBaffle, H_Floc) - Pi_Baffle*S_FlocLF(Q_Plant) - 0.5*H_PlantFreeboard
L_FlocBafflesLowerLF(ED_FlocBod, Q_Plant, W_FlocChannel, L_FlocChannel, T_FlocBaffle, H_Floc, Pi_Baffle) := max(Z_SedWeirExit - S_FlocLF(Q_Plant), H_Floc - Pi_Baffle*S_FlocLF(Q_Plant))
N_FlocBafflesUpperLF(Q_Plant) := (fN_FlocChannelSpacesLF(Q_Plant)/2 - 1)*fN_FlocChannelsLF(Q_Plant)
N_FlocBafflesLowerLF(Q_Plant) := fN_FlocChannelSpacesLF(Q_Plant)/2*fN_FlocChannelsLF(Q_Plant) - 1
L_FlocBafflesTotalLF(ED_FlocBod, Q_Plant, W_FlocChannel, L_FlocChannel, T_FlocBaffle, H_Floc, Pi_Baffle) := N_FlocBafflesUpperLF(Q_Plant)*L_FlocBafflesUpperLF(ED_FlocBod, Q_Plant, W_FlocChannel, L_FlocChannel, T_FlocBaffle, H_Floc, Pi_Baffle) + N_FlocBafflesLowerLF(Q_Plant)*L_FlocBafflesLowerLF(ED_FlocBod, Q_Plant, W_FlocChannel, L_FlocChannel, T_FlocBaffle, H_Floc, Pi_Baffle)
# Assign correct variables based on horiz/vert/lowflow
N_FlocChannels :=
    N_FlocChannelsLF if Q_Plant ≤ Q_PlantMaxLF
    N_FlocChannelsV if EN_FlocHoriz == 0 and Q_Plant > Q_PlantMaxLF
    N_FlocChannelsH otherwise
W_FlocChannel :=
    W_FlocChannelLF if Q_Plant ≤ Q_PlantMaxLF
    W_FlocChannelV if EN_FlocHoriz == 0 and Q_Plant > Q_PlantMaxLF
    W_FlocChannelH otherwise
    = 0.45 m
S_FlocBaffle :=
    S_FlocBaffleLF if Q_Plant ≤ Q_PlantMaxLF
    S_FlocBaffleV if EN_FlocHoriz == 0 and Q_Plant > Q_PlantMaxLF
    S_FlocBaffleH otherwise
S_FlocBaffleFirst := S_FlocBaffle[0]
H_Floc :=
    H_Sed + h_eFlocLF if Q_Plant ≤ Q_PlantMaxLF
    H_FlocWallsVF(ED_Floc, Q_Plant, W_FlocChannelV, L_Sed, T_FlocBaffle, HW_FlocEnd) if EN_FlocHoriz == 0 and Q_Plant > Q_PlantMaxLF
    HL_FlocH + HW_FlocEnd + H_PlantFreeboard otherwise
    = 2.15174 m
HL_Floc :=
    h_eFlocLF if Q_Plant ≤ Q_PlantMaxLF
    h_eFlocV if EN_FlocHoriz == 0 and Q_Plant > Q_PlantMaxLF
    HL_FlocH otherwise
    = 0.196512 m
HL_FlocBaffle :=
    h_eFlocLFBaffle if Q_Plant ≤ Q_PlantMaxLF
    h_eBaffleV if EN_FlocHoriz == 0 and Q_Plant > Q_PlantMaxLF
    HL_FlocBaffleH otherwise
    = 0.00357295 m
N_FlocChannelBaffles :=
    N_FlocChannelBafflesLF if Q_Plant ≤ Q_PlantMaxLF
    N_FlocChannelBafflesV if EN_FlocHoriz == 0 and Q_Plant > Q_PlantMaxLF
    N_FlocChannelBafflesH otherwise
B_FlocBaffle := S_FlocBaffle + T_FlocBaffle
H_FlocPort :=
    for i ∈ 0 .. N_FlocChannels - 1
        H_Port[i] ←
            (Pi_FlocBaffle*S_FlocV*W_FlocChannel/(S_FlocV - S_FlocPortGap)) if EN_FlocHoriz == 0
            H_Floc otherwise
    H_Port
W_FlocPort :=
    for i ∈ 0 .. N_FlocChannels - 2
        W_Port[i] ← S_FlocBaffle[0] - S_FlocPortGap
    W_Port[N_FlocChannels - 1] ← W_SedInletChannelPreWeir
    W_Port
    = [0.24546; 0.336537] m
## Position calculations for each baffle
# Now we need to assign positions, lengths and elevations to floc baffles
L_Floc :=
    W_FlocTankLF if Q_Plant ≤ Q_PlantMaxLF
    L_Sed otherwise
# For horizontal the baffles are side to side instead of upper and lower, but we just kept those names for consistency. The lengths are the same on both sides. Since we kept J.FlocChannel the same for last channel too (as opposed to modifiying it in the case of slightly different spacing) we can just subtract the baffle spacing in the first channel (this is the length that the water flows around beyond the baffle). Look at a plant drawing if this doensn't make sense.
W_Floc :=
    L_FlocLF if Q_Plant ≤ Q_PlantMaxLF
    (N_FlocChannels*W_FlocChannel) + ((N_FlocChannels - 1)*T_PlantWall) otherwise
    = 1.05 m
HW_FlocEnd = 1.85523 m
HW_FlocStart := H_Floc - H_PlantFreeboard = 2.05174 m
L_FlocBaffleLower :=
    W_FlocChannel - S_FlocBaffle[0] if EN_FlocHoriz == 1 and Q_Plant > Q_PlantMaxLF
    L_FlocBafflesLowerLF(ED_Floc, Q_Plant, W_FlocChannelLF, W_FlocTankLF, T_FlocBaffle, HW_FlocEnd, Pi_FlocBaffle) if Q_Plant ≤ Q_PlantMaxLF
    L_FlocBafflesLowerVF(ED_Floc, Q_Plant, W_FlocChannel, L_Sed, T_FlocBaffle, HW_FlocEnd, Pi_FlocBaffle) otherwise
    = 1.45704 m
# Assign generic variables based on horizontal or vertical
L_FlocBaffleUpper :=
    W_FlocChannel - S_FlocBaffle[0] if EN_FlocHoriz == 1 and Q_Plant > Q_PlantMaxLF
    L_FlocBafflesUpperLF(ED_Floc, Q_Plant, W_FlocChannelLF, W_FlocTankLF, T_FlocBaffle, HW_FlocStart, Pi_FlocBaffle) if Q_Plant ≤ Q_PlantMaxLF
    L_FlocBafflesUpperVF(ED_Floc, Q_Plant, W_FlocChannel, L_Sed, T_FlocBaffle, HW_FlocEnd, Pi_FlocBaffle) otherwise
    = 1.70355 m
N_FlocBaffleLower :=
    for i ∈ 0 .. N_FlocChannels - 1
        N_FlocBaffleLowerV[i] ← floor((N_FlocChannelBaffles[i] + 1)/2)
    return N_FlocBaffleLowerV
# Calculate the number of lower baffles per channel as an array
N_FlocBaffleLowerTotal := sum(N_FlocBaffleLower) = 27  # Calculate the total number of lower baffles
N_FlocBaffleUpper :=
    for i ∈ 0 .. N_FlocChannels - 1
        N_FlocBaffleUpperV[i] ← (N_FlocChannelBaffles[i] - N_FlocBaffleLower)[i]
    return N_FlocBaffleUpperV
# Subtract the total number of  lower baffles in a channel from the total number of baffles in that channel to find the number of upper baffles as an array for each channel.
N_FlocBaffleUpperTotal := sum(N_FlocBaffleUpper) = 26  # Calculate the total number of upper baffles
N_FlocBaffleLowerTotal + N_FlocBaffleUpperTotal + N_FlocChannels = 55
L_Slot :=
    L_Slot ← T_ConcreteMin if EN_FlocBaffle == 0 and EN_FlocHoriz == 0
    L_Slot ← 0 m otherwise  # If the flocculator is vertical with rigid baffles, slots in the channel walls are needed to hold them in place.
W_FlocBaffle :=
    W_FlocChannel + 2*L_Slot if EN_FlocHoriz == 0
    H_Floc otherwise
# If there is a slot, the width of the baffle needs to be wider than the channel to fit into the slot. Since there are slots at each end, it is wider by twice the length of the slot.
N_FlocChannels = 2  # B is the center to center distance between baffles whereas S was the distance without any thicknesses included.
# The first and last spacing are defined so that they can be returned to the builder.
N_FlocChannelBaffles = [27; 26]
# X.FlocBaffles creates an array for all of the "x" positions of the baffles. The x direction goes in the direction of the longer length of the flocculator channels.
X_FlocBaffles :=
    for channel ∈ 0 .. N_FlocChannels - 2
        for i ∈ 0 .. N_FlocChannelBaffles[channel] - 1
            x[i, channel] ← S_FlocBaffle[channel] + B_FlocBaffle[channel]*i
    for i ∈ 0 .. N_FlocChannelBaffles[N_FlocChannels - 1] - 1
        x[i, N_FlocChannels - 1] ← B_FlocBaffle[N_FlocChannels - 1]*i + (L_Floc - B_FlocBaffle[N_FlocChannels - 1]*N_FlocChannelBaffles[N_FlocChannels - 1])
    return x
# if the spacing between baffles is less than the sum of the inlet channel and the "lip" between ports and the nearest baffle, at least one baffle will be in the midst of the inlet channel (or too close to it). In this case, respace the baffles using the remaining length (Length of the sed tank - width of the inlet channel - "lip"). The remaining space should be divided by the number of calculated spaces -1 because one baffle would be aligned with the edge of the remaining space (not dividing it up into 2 spaces). if the spacing is not such that at least one baffle will be in the midst of the inlet channel, space normally.
Y_FlocBafflesH :=
    if EN_FlocHoriz == 1
        if mod(N_FlocChannels, 2) == 0
            for i ∈ 0 .. (N_FlocChannels - 1)
                for j ∈ 0 .. N_FlocChannelBaffles[i] - 1
                    Y_FlocBaffles[j, i] ← (Plant_Origin[1] + (N_SedTanks*(W_Sed + T_PlantWall)) + ((N_FlocChannels - i - 1)*(W_FlocChannel + T_PlantWall))) + mod(j, 2)*S_FlocBaffle[0] if mod(i, 2) == 1
                    Y_FlocBaffles[j, i] ← (Plant_Origin[1] + (N_SedTanks*(W_Sed + T_PlantWall)) + ((N_FlocChannels - i - 1)*(W_FlocChannel + T_PlantWall))) + mod(j + 1, 2)*S_FlocBaffle[0] otherwise
            Y_FlocBaffles[j, i]
        otherwise
            for i ∈ 0 .. (N_FlocChannels - 1)
                for j ∈ 0 .. N_FlocChannelBaffles[i] - 1
                    Y_FlocBaffles[j, i] ← (Plant_Origin[1] + (N_SedTanks*(W_Sed + T_PlantWall)) + ((N_FlocChannels - i - 1)*(W_FlocChannel + T_PlantWall))) + mod(j, 2)*S_FlocBaffle[0] if mod(i + 1, 2) == 1
                    Y_FlocBaffles[j, i] ← (Plant_Origin[1] + (N_SedTanks*(W_Sed + T_PlantWall)) + ((N_FlocChannels - i - 1)*(W_FlocChannel + T_PlantWall))) + mod(j + 1, 2)*S_FlocBaffle[0] otherwise
            Y_FlocBaffles[j, i]
    return Y_FlocBaffles
# S.FlocBaffle0 should be used because if the last channel is respaced it screws up how it is drawn so that there is a little gap between the bafflle and the edge of the channel.
# Even number of floc channels causes the entrance tank to switch sides
# Odd number of floc channels
Y_FlocBafflesV :=
    if EN_FlocHoriz == 0
        for j ∈ 0 .. (N_FlocChannels - 1)
            Y_FlocBaffles[0, j] ← Plant_Origin[1] + (N_SedTanks*(W_Sed + T_SedWallDivider)) + T_PlantWall - T_SedWallDivider + ((N_FlocChannels - j - 1)*(W_FlocChannel + T_FlocChannelWall))
    return Y_FlocBaffles
# The y position of the baffles is the same within each channel for vertical. Again, draw it out to understand the code.
Y_FlocBafflesLF :=
    if EN_FlocHoriz == 0
        for j ∈ 0 .. (N_FlocChannels - 1)
            Y_FlocBaffles[0, j] ← Plant_Origin[1] + (N_SedTanks*(W_Sed + T_PlantWall)) + W_FlocChannelLast + ((N_FlocChannels - j - 1)*(W_FlocChannel + T_FlocChannelWall))
    return Y_FlocBaffles
    = [4.56947, 3.96947] m
Y_FlocBaffles :=
    Y_FlocBaffles ← Y_FlocBafflesH if EN_FlocHoriz == 1
    Y_FlocBaffles ← Y_FlocBafflesLF if Q_Plant ≤ Q_PlantMaxLF
    Y_FlocBaffles ← Y_FlocBafflesV otherwise
Channels := 0 .. N_FlocChannels - 1
Z_FlocBafflesH :=
    if EN_FlocHoriz == 1
        for channel ∈ Channels
            for i ∈ 0 .. N_FlocChannelBaffles[channel] - 1
                z[i, channel] ← 0 m
    return z  # Z array is the elevation of the bottom of the baffle. For horizontal, all baffles are at the same elevation.
Channelsnew := 0 .. N_FlocChannels - 2
Z_FlocBafflesV :=
    if EN_FlocHoriz == 0
        for channel ∈ Channelsnew
            for i ∈ 0 .. N_FlocChannelBaffles[channel] - 1
                z[i, channel] ← mod(i, 2)*S_FlocBaffle[channel]*Pi_FlocBaffle
        for i ∈ 0 .. N_FlocChannelBaffles[N_FlocChannels - 1] - 1
            z[i, N_FlocChannels - 1] ← mod(i + 1, 2)*S_FlocBaffle[channel]*Pi_FlocBaffle
    return z
    = [
        0, 0.398189;
        0.398189, 0;
        0, 0.398189;
        0.398189, 0;
        0, 0.398189;
        0.398189, 0;
        0, 0.398189;
        0.398189, 0;
        0, 0.398189;
        0.398189, 0;
        0, 0.398189;
        0.398189, 0;
        0, 0.398189;
        0.398189, 0;
        0, 0.398189;
        0.398189, 0;
        0, 0.398189;
        0.398189, 0;
        0, 0.398189;
        0.398189, 0;
        0, 0.398189;
        0.398189, 0;
        0, 0.398189;
        0.398189, 0;
        0, 0.398189;
        0.398189, 0;
        0, 0
    ] m
# For vertical, every other baffle is raised. The last channel is slightly different to maintain the flow pattern.
N_FlocChannelBaffles[N_FlocChannels - 1] - 1 = 25
Z_FlocBafflesLF :=
    if EN_FlocHoriz == 0
        for channel ∈ 0 .. N_FlocChannels - 1
            for i ∈ 0 .. N_FlocChannelBaffles[channel] - 1
                z[i, channel] ← mod(i, 2)*S_FlocBaffle[channel]*Pi_FlocBaffle
    return z
    = [
        0, 0;
        0.398189, 0.398189;
        0, 0;
        0.398189, 0.398189;
        0, 0;
        0.398189, 0.398189;
        0, 0;
        0.398189, 0.398189;
        0, 0;
        0.398189, 0.398189;
        0, 0;
        0.398189, 0.398189;
        0, 0;
        0.398189, 0.398189;
        0, 0;
        0.398189, 0.398189;
        0, 0;
        0.398189, 0.398189;
        0, 0;
        0.398189, 0.398189;
        0, 0;
        0.398189, 0.398189;
        0, 0;
        0.398189, 0.398189;
        0, 0;
        0.398189, 0.398189;
        0, 0
    ] m
Z_FlocBaffles :=
    Z_FlocBaffles ← Z_FlocBafflesH if EN_FlocHoriz == 1
    Z_FlocBaffles ← Z_FlocBafflesLF if Q_Plant ≤ Q_PlantMaxLF
    Z_FlocBaffles ← Z_FlocBafflesV otherwise
L_FlocBafflesH :=
    if EN_FlocHoriz == 1
        for channel ∈ Channels
            for i ∈ 0 .. N_FlocChannelBaffles[channel] - 1
                l[i, channel] ← L_FlocBaffleLower
    return l  # L array is the length of the baffles
# The lengths of all the baffles are the same for horizontal
L_FlocBafflesV :=
    if EN_FlocHoriz == 0
        for channel ∈ Channels
            for i ∈ 0 .. N_FlocChannelBaffles[channel] - 1
                l[i, channel] ← L_FlocBaffleUpper if mod(i, 2) == 1
                l[i, channel] ← L_FlocBaffleLower otherwise
        for i ∈ 0 .. N_FlocChannelBaffles[last(N_FlocChannelBaffles)] - 1
            l[i, N_FlocChannels - 1] ← L_FlocBaffleLower if mod(i, 2) == 1
            l[i, N_FlocChannels - 1] ← L_FlocBaffleUpper otherwise
    return l  # For vertical, the lengths of the upper baffles are different from the lower baffles.
# For the last channel, the length of the
# baffles needed to be changed since the
# up/down had been adjusted.
L_FlocBaffles :=
    L_FlocBaffles ← L_FlocBafflesH if EN_FlocHoriz == 1
    L_FlocBaffles ← L_FlocBafflesV otherwise
L_FlocWithWalls := L_Sed + 2*T_PlantWall = 7.78687 m
W_FlocWithWalls := W_FlocChannel*N_FlocChannels + T_PlantWall*N_FlocChannels
# W.FlocWithWalls Doesnt include wall shared with sed tank because that is accounted for in sed tank.
# Z.FlocTank is the elevation of the flocculator with respect to the bottom of the sed tank.
Z_FlocTank := HW_Sed - HW_FlocEnd = 0 m
# Calculate the length and width of the flocculator including the walls for easy construction (values are returned to user).
HW_FlocStart := H_Floc - H_PlantFreeboard
HW_FlocChannel := (HW_FlocStart + HW_FlocEnd)/2
# Assign and Calculate Final Parameters
# Pipe Spacer Size
OD_PipeSpacerEstF := [FloorNearest(.6*W_FlocChannel, Pipesizes[:, 1]); CeilNearest(.6*W_FlocChannel, Pipesizes[:, 1])] = [8.625; 10.75] in
OD_PipeSpacerEstC := CeilNearest(.6*W_FlocChannel, Pipesizes[:, 1]) = 10.75 in
Index :=
    for i ∈ 0 .. 1
        I[i] ← index(OD_PipeSpacerEstF[i], Pipesizes[:, 1])
        Avail ← CountryPipes[I[i], Country]
        if Avail == 0
            while Avail == 0
                I[i] ← I[i] + 1
                Avail ← CountryPipes[I[i], Country]
    return I
    = [15; 16]
ND_SpacerPipeArray := [Pipesizes[Index[0], 0]; Pipesizes[Index[1], 0]] = [8; 10] in
OD_PipeSpacer := [outerdiameter(ND_SpacerPipeArray[0]); outerdiameter(ND_SpacerPipeArray[1])] = [8.625; 10.75] in
A_Percentage := OD_PipeSpacer/W_FlocChannel = [0.486833; 0.606778]
ND_SpacerPipeLF :=
    ND_SpacerPipeArray[index(RoundNearest(.6, A_Percentage), A_Percentage)] if Q_Plant ≤ Q_PlantMaxLF
    0.75 in otherwise
    = 0.75 in
ND_SpacerPipe :=
    ND_SpacerPipe if Q_Plant > Q_PlantMaxLF
    ND_SpacerPipeLF otherwise
# Number and Spacing of Obstacles
S_OverLap := L_FlocBaffles[0, 0] - Z_FlocBaffles[1, 0] = 1.05885 m
S_Obstacle := (S_OverLap - outerdiameter(ND_SpacerPipe)*N_FlocObstaclesLF(Q_Plant))/(N_FlocObstaclesLF(Q_Plant) + 1)  # error: This value must be a scalar or a matrix.
V_FlocLF := Q_Plant/(S_FlocBaffle[0]*W_FlocChannel - outerdiameter(ND_SpacerPipe)*S_FlocBaffle[0]) = 0.177972 m/s
V_Floc :=
    V_FlocV if EN_FlocHoriz == 0
    V_FlocLF if Q_Plant ≤ Q_PlantMaxLF
    V_FlocH otherwise
    = 0.167425 m/s
# use this last term to estimate the volume taken up by the module piping
Vol_FlocFirstChannelsV := (N_FlocChannels - 2)*W_FlocPort*H_FlocPort*T_PlantWall + (W_FlocChannelV*L_Sed*((2*HW_FlocEnd + HL_Floc)/2) - (T_FlocBaffle*W_FlocChannel*(N_FlocBaffleLower[0]*L_FlocBaffleLower + N_FlocBaffleUpper[0]*L_FlocBaffleUpper)) - ConRadius(ND_FlocModulesMain)^2*π*L_Sed*6)*(N_FlocChannels - 1)
Vol_FlocLastChannelV := (W_FlocPort*H_FlocPort*T_PlantWall + W_FlocChannelV*L_Sed*((2*HW_FlocEnd + HL_Floc)/2) - (T_FlocBaffle*W_FlocChannel*(N_FlocBaffleLower[N_FlocChannels - 1]*L_FlocBaffleLower + N_FlocBaffleUpper[N_FlocChannels - 1]*L_FlocBaffleUpper)) - ConRadius(ND_FlocModulesMain)^2*π*L_Sed*6)
Vol_FlocV := Vol_FlocFirstChannelsV + Vol_FlocLastChannelV = 13096.9 L
Vol_FlocH := (W_FlocChannelH*L_Sed*(HW_FlocEnd + HL_FlocH/2))*N_FlocChannels - sum(N_FlocChannelBaffles)*T_FlocBaffle*L_FlocBaffles[0, 0]*W_FlocBaffle + W_FlocPort*H_FlocPort*T_PlantWall*(N_FlocChannels - 1) = 11596.5 L
Vol_FlocLF := H_FlocLF*W_FlocTankLF*fN_FlocChannelsLF(Q_Plant)*W_FlocChannel - (outerdiameter(ND_SpacerPipe)^2*π/4*W_FlocTankLF*N_FlocObstaclesLF(Q_Plant)*fN_FlocChannelsLF(Q_Plant))  # error: This value must be a scalar or a matrix.
Vol_Floc :=
    Vol_FlocV if EN_FlocHoriz == 0
    Vol_FlocLF if Q_Plant ≤ Q_PlantMaxLF
    Vol_FlocH otherwise
G_Floc := sqrt(HL_Floc*Q_Plant*g/(Nu_Water*Vol_Floc))
Ti_FlocH := Vol_FlocH/Q_Plant
Ti_FlocLF := Vol_FlocLF/Q_Plant
Ti_Floc :=
    Ti_FlocV if EN_FlocHoriz == 0 and Q_Plant > Q_PlantMaxLF
    Ti_FlocLF if Q_Plant ≤ Q_PlantMaxLF
    Ti_FlocH otherwise
ED_FlocAveH := K_FlocBaffle*V_Floc^3/(2*W_FlocChannel) = 13.0363 mW/kg
ED_FlocAve := g*HL_Floc/Ti_Floc
ED_FlocMaxLF :=
    g*h_eFlocLF/(Vol_FlocLF/Q_Plant) if Q_Plant ≤ Q_PlantMaxLF
    "null" otherwise
ED_FlocMax :=
    ED_FlocMaxV if EN_FlocHoriz == 0 and Q_Plant > Q_PlantMaxLF
    ED_FlocMaxLF if Q_Plant ≤ Q_PlantMaxLF
    ED_FlocMaxH otherwise
CP_FlocActual :=
    Ψ_FlocV if EN_FlocHoriz == 0 and Q_Plant > Q_PlantMaxLF
    Ψ_FlocLF(Q_Plant) if Q_Plant ≤ Q_PlantMaxLF
    Ψ_FlocH otherwise
## Drain Calculations (Vertical)
# This is a program to calculate how much time is required to drain out a flocculator section. Each section of the flocculator is connected to one another with alternating holes on the bottom of the baffles. These holes are small enough not to disrupt flow over the baffles and big enough such that one drain will empty out all the sections.
# Initially, the tank is full. This is denoted at time=t(0).
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# Once the tanks start draining, at time=t(1) all the water is level.
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# At time=t(2), section 1 has begun to drain quicker than sections 2, 3 & 4.
# Each hole on the bottom of the baffles is treated as an orifice.
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# available valve diameters
ND_Valvem := [0.0508; 0.0762; 0.1016; 0.127; 0.1524; 0.1778; 0.2032]*m
Q_minor(K_minor, D, h1, h2) :=
    Q ← (π*D^2/4*sqrt(2*g*(h1 - h2)/K_minor)) if h1 - h2 > 0
    Q ← 0*m^3/s otherwise
# Base and width are defined as the base and width of a single channel
# We need to calculate 'n' different h values plus an extra 'h'
# which would be the value emptied from tank 1. The tanks are
# numbered from 1 to n
# There will only be n-1 different flows out from each tank
# . | .
t_masterV(base, width, D_Valve, K_Valve, h_initial, H_LowerBaffle, n_tanks) :=
    time ← (sqrt(h_initial) - sqrt(H_LowerBaffle))/((π*D_Valve^2/(8*n_tanks*base*width))*sqrt(2*g/K_Valve))
    Δt ← base*width*H_LowerBaffle/(Q_minor(K_Valve, D_Valve, H_LowerBaffle, 0 m)*100)
    for i ∈ 0 .. n_tanks
        h_tank[i] ← H_LowerBaffle
    h_tank[0] ← 0 m
    while h_tank[n_tanks, 0] > 1 mm
        time ← time + Δt
        for i ∈ 0 .. n_tanks
            Q[i] ← Q_minor(K_Valve, D_Valve, h_tank[i + 1], h_tank[i]) if i < n_tanks
            Q[i] ← 0*m^3/s otherwise
            h_tank[i] ← h_tank[i] + (Q[i] - Q[i - 1])*Δt/(base*width) if i > 0
            h_tank[i] ← 0 m otherwise
    return time  # initial guess for time based on the total number of tanks in each channel
# delta t is based on the height of the lower baffle in the first channel
# Solution path to get port area and valve diameter
# Find area of ports assuming all including valve are same area.
# Try solution with valve one size smaller
# find required port area
# If that doesn't work, then increase valve size
# find required port area
# These equations are from integration of the flow out of a tank with changing depth
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# If the valve is the flow limiter, the relationship is linear
# think about making this more generic?
# also exists in another form in pipe database
# The following function returns a port size based on allowable valve sizes
ND_FlocValveF(desiredT) :=
    tankDrainTime ← 100 hr
    i ← 0
    ND_Valve ← 0 m
    N_tanks ←
        N_FlocChannelBaffles[0] if N_FlocChannels > 2
        floor(N_FlocChannelBaffles[0]/2) otherwise
    ND_ValveStart ← NominalDiameter(sqrt(sqrt((HW_FlocEnd + HW_FlocStart)/2)/((π*desiredT/(8*L_Sed*2*(T_PlantWall + W_FlocChannel)))*sqrt(2*g/(K_GateValve + K_Exp)))), PS_Default)
    if EN_FlocHoriz == 0
        ND_Valve ← ND_Valvem[last(ND_Valvem)] if desiredT ≤ t_masterV(2*S_FlocBaffle[0], W_FlocChannel, innerdiameter(ND_Valvem[last(ND_Valvem)], PS_Default), K_GateValve + K_Exp, HW_FlocChannel, L_FlocBaffleLower, N_tanks)
        i ← index(ND_ValveStart, ND_Valvem)
        while i < rows(ND_Valvem) and ND_Valve == 0 m
            tankDrainTime ← t_masterV(2*S_FlocBaffle[0], W_FlocChannel, innerdiameter(ND_Valvem[last(ND_Valvem)], PS_Default), K_GateValve + K_Exp, HW_FlocChannel, L_FlocBaffleLower, N_tanks)
            ND_Valve ← ND_Valvem[i] if tankDrainTime < desiredT
            i ← i + 1 otherwise
            ND_Valve
    ND_Valve ← ND_ValveStart otherwise
    ND_Valve
# For vertical, the tank being drained is modeled as a series of tanks corresponding to the number of spaces between lower baffles in two channels (since valves are every other channel)
# Accounts for the case where there is only two channels and there will be a valve in both; divides the number of tanks by 2 in that case
# In the event the desired drain time cannot eb acheived by the alrgest valve size, the valve size is assigned to be the largest size
# For horizontal, calculates the ideal diameter then finds the next highest allowable diameter.  Assigns the largest valve size if the guess is larger than that.
ND_FlocValveLF(desiredT) :=
    tankDrainTime ← 100 hr
    i ← 0
    ND_Valve ← 0 m
    N_tanks ← N_FlocChannels
    ND_ValveStart ← NominalDiameter(sqrt(sqrt((HW_FlocEnd + HW_FlocStart)/2)/((π*desiredT/(8*L_Floc*N_FlocChannels*(T_FlocChannelWall + W_FlocChannel)))*sqrt(2*g/(K_GateValve + K_Exp)))), PS_Default)
    if EN_FlocHoriz == 0
        ND_Valve ← ND_Valvem[last(ND_Valvem)] if desiredT ≤ t_masterV(2*S_FlocBaffle[0], W_FlocChannel, innerdiameter(ND_Valvem[last(ND_Valvem)], PS_Default), K_GateValve + K_Exp, HW_FlocChannel, L_FlocBaffleLower, N_tanks)
        i ← index(ND_ValveStart, ND_Valvem)
        while i < rows(ND_Valvem) and ND_Valve == 0 m
            tankDrainTime ← t_masterV(2*S_FlocBaffle[0], W_FlocChannel, innerdiameter(ND_Valvem[last(ND_Valvem)], PS_Default), K_GateValve + K_Exp, HW_FlocChannel, L_FlocBaffleLower, N_tanks)
            ND_Valve ← ND_Valvem[i] if tankDrainTime < desiredT
            i ← i + 1 otherwise
            ND_Valve
    ND_Valve ← ND_ValveStart otherwise
    ND_Valve
ND_FlocValve :=
    ND_FlocValveLF(Ti_FlocDrain) if Q_Plant ≤ Q_PlantMaxLF
    ND_FlocValveF(Ti_FlocDrain) otherwise
    = 3 in
D_FlocValve := 2*outerradius(ND_FlocValve) = 0.0889 m
H_FlocSlope := D_FlocValve/2
# Uses the nominal diameter of the valve to find the actual diameter (outer diameter of the  threaded side of the coupling/inner diameter of valve).  This is used to draw the drains more accurately.D FlocValve ends up being the ID of the valve and the OD of the coupling.
L_BafflePort := sqrt(π/4*D_FlocValve^2)
D_FlocScale := D_FlocValve/(1.16 m) = 0.0766379  # Scaling factor needed for insertion.  This is based on how the block is saved
# Assupmtions:
# The Flocculator can be assumed as one straight channel rather than wrapping back and forth
# The port size is calculated for the time to drain 2 channels, since there is a valve on at least every other channel
# The volume of each "tank" (space between baffles) is equal
# The size of a port is equal to the size of the valve
# The minor loss through the port is the same as the minor loss through the valve (K.Exp + K.GateValve)
# Drain Valve Position Calcs for Vertical Flocculator
Y_FlocDrainValves :=
    for i ∈ 0 .. ceil(N_FlocChannels/2) - 1
        y[i] ← Plant_Origin[1] + N_SedTanks*(W_Sed + T_SedWallDivider) + 0.5*W_FlocChannel + 2*(W_FlocChannel + T_FlocChannelWall)*i
    y
# Makes Drain vales a vector even if there is only 1 valve to make drawing easier
Y_FlocDrainValves = [3.8754] m
N_FlocValves := length(Y_FlocDrainValves) = 1
# Starts calculating from the side closer tot he sed tank and moves towards the entrance tank.  Places the valve in the center of each channel so that the center of each valve is at-grade.
# Floc Tank Baffle Modules
EN_ModuleIdentical :=
    1 if 2*H_Floc - H_PlantFreeboard - L_FlocBaffleUpper - L_FlocBaffleLower ≤ 40 cm
    0 otherwise
    = 0
# if the non-overlapping length of the modules are 40cm or less, all module pipes may be identical in the z-direction.
# ensure at least 4 baffles per long module if module pipes are not identical
L_FlocModuleMin :=
    max(4*B_FlocBaffle, 65 cm) if EN_ModuleIdentical == 0
    (65 cm) otherwise
    = 1.06984 m
# As soon as SFlocBaffle is greater than 45cm then you can use concrete. Check if En.FlocBaffle=1 which tells you that its a vertical flocculator
# FlocModuleMin is a prelimary perameter to allow for further calculations. It is the min length that the users will be able to handle of the module.
EN_FlocBaffle = 1
# L.FlocModuleTarget compares the lengths of the L.FlocModuleMing and two times the Baffles spacing to give you a length that will have a least 2 baffles per module
L_FlocModuleTarget := max(L_FlocModuleMin, S_FlocBaffle[last(S_FlocBaffle)]) = 1.06984 m
# want a minimum of 2 baffles per module, meaning it needs to be at least as large as a space between baffles
B_FlocBaffle = [0.26746; 0.26746] m
S_FlocBaffle = [0.26546; 0.26546] m
EN_FlocHoriz = 0
ModuleProperties :=
    for i ∈ 0 .. last(N_FlocChannelBaffles)
        N_FlocBafflesLong[i] ← max(2*floor((L_FlocModuleTarget/B_FlocBaffle[i] + 1)/2), 1)
        N_FlocLongModule[i] ← floor(N_FlocChannelBaffles[i]/N_FlocBafflesLong[i])
        N_FlocBafflesShort[i] ← N_FlocChannelBaffles[i] - N_FlocBafflesLong[i]*N_FlocLongModule[i]
    return [N_FlocBafflesLong, N_FlocLongModule, N_FlocBafflesShort]
# The modules properties loop:  goes through all the baffles in the channel to first calculate the number of baffles in each long baffle, then the number of long modules, then the number of baffles per short module.
# The number of baffles in each long module is found by dividing the Floc Module target length by two times the baffle spacing(since we want even pairs) and then flooring this to get rid of the remainder. This number will then be multiplied by 2 to get the total number of baffles. This will go through each channel of the floc tank.
# Using the values above, we can find  the total number of modules per channel. Since we know the total number of baffles per channel, we can find the the amount of long modules will be in each channel by dividing the total number of Floc Channel Baffles by Floc baffles long and flooring this, to get rid of the remainder.
# After this, we are able to find the total number of baffles in the short module found at the end of the channel. Since we got rid of the remainders, we have to take these numbers into account by putting these extra baffles into the short module.The total number of baffles in each channel are substracted by the product of N.Flocbaffleslongand NflocLongModule.
# This code returns number of baffles in the long module, number of long modules per channel in tank, and the number of baffles in the short module in each channel
# 6/25/12 - changed the N.FlocBafflesLong[i calculation to include a max function; this prevents the denominator for the final value for N.FlocLongModule from going to zero. As this only happens for high flow rates when the flocculator will be horizontal and modules are not necessary, this will not affect the final design at all, but simply avoids undefined values that will prevent AC.FlocTank from being defined for high flow rates.
ModuleProperties = [[4; 4], [6; 6], [3; 2]]
N_FlocChannelBafflesLong := ModuleProperties[0, 0]
# Number of baffles in the long module
N_FlocChannelModulesLong := ModuleProperties[0, 1]  # Number of long modules per channel  in tank
# Number of baffles in the short module in each channel
N_FlocChannelBafflesShort := ModuleProperties[0, 2]
# True length of Module
# Since the size of the target module length changes due to the cap depths, the true length of the module needs to be calculated
# Calculates the socket depth of a 1/2 diameter cap
# L.ModuleLong: goes through the all the baffles in each long module and adds on the socket depth and subtracts a cap thickness. It substracts one baffle spacing due to the geometery of the connections. Returns the length of the true length of the long modules.
L_FlocModuleLong :=
    for i ∈ 0 .. last(N_FlocChannelBafflesLong)
        L_ModuleLong[i] ← (N_FlocChannelBafflesLong[i] - 1)*B_FlocBaffle[i] + SocketDepth(ND_FlocModulesMain) - CapThickness(ND_FlocModulesMain)
    return L_ModuleLong
# True for middle  pipe baffles don't overlap enough
L_FlocModuleLongOuter :=
    for i ∈ 0 .. last(N_FlocChannelBafflesLong)
        L_ModuleLong[i] ← (N_FlocChannelBafflesLong[i] - 2)*B_FlocBaffle[i] + SocketDepth(ND_FlocModulesMain) - CapThickness(ND_FlocModulesMain)
    return L_ModuleLong
# Cap thickness of a 1/2 inch diameter cap using the outer radius and cap diameter given in the pipe database
# L.ModuleShort: Goes through the baffles in a short module.
# If the there are no short modules, the code returns that the length is 0. If there are baffles, it multiplies the baffle spacing with the number of baffles in the short module and adds  the socket depth and substracts teh capthickness.
L_FlocModuleShort :=
    for i ∈ 0 .. last(N_FlocChannelBafflesShort)
        ModuleLengthShort[i] ← 0 if N_FlocChannelBafflesShort[i] == 0
        ModuleLengthShort[i] ← X_FlocBaffles[0, 0] - CapThickness(ND_FlocModulesMain) if N_FlocChannelBafflesShort[i] == 1
        ModuleLengthShort[i] ← B_FlocBaffle[i]*(N_FlocChannelBafflesShort[i] - 1) + SocketDepth(ND_FlocModulesMain) - CapThickness(ND_FlocModulesMain) otherwise
    return ModuleLengthShort
# True for the middle, lower, and upper pipe when baffles don't overlap enough
L_FlocModuleShort = [0.534237; 0.266777] m
# Coupling thicknessgiven by the the cap diameter and the outer radius of cap of 1.5inches found in the pipe database
# The length of the connector pipe is calculated by subtracting the coupling length plus the socket depth(both of 1/5inch diameter caps) and minus the capthickcouple from the baffle spacing.
L_FlocModuleConnector :=
    for i ∈ 0 .. N_FlocChannels - 1
        L_Connector[i] ← S_FlocBaffle[i] - CouplingLength(1/2*in) + SocketDepth(1/2*in) - CapThickness(1.5 in)
    L_Connector
# This is the length of the last module pipe
# True for the middle pipe when baffles don't overlap enough
L_FlocModuleConnectorOuter :=
    for i ∈ 0 .. N_FlocChannels - 1
        L_Connector[i] ← 2*S_FlocBaffle[i] + T_FlocBaffle - CouplingLength(1/2*in) + SocketDepth(1/2*in) - CapThickness(1.5 in)
    L_Connector
S_ModulePipesH :=
    for i ∈ 0 .. N_FlocChannels - 1
        S[i] ← N_FlocChannelBafflesLong[i]*B_FlocBaffle[i]
    S
# The length of the module spacing is calculated by the baffle thickness plus the small cap plus the big cap plus the connector pipe length plus the coupling length minus the socket depth plus the floc baffle spacing.
S_ModulePipesV := (L_FlocBaffleLower - S_FlocBaffle[last(S_FlocBaffle)]*Pi_FlocBaffle)/4
L_Sed - W_Floc = 6.43687 m
