# Flow Rate Calculations
# Low Flow Constants:
Q_Plant := 1*L/s
HL_FlocMax := 40 cm
H_SedSlopesToFlocWeirMin := 25 cm
T_FlocSlab := 15 cm
T_SedWall := 5 cm
T_FlocWall := 15 cm
T_FiBoxWall := 15 cm
T_PlantWall := 5 cm
T_PlantFloor := 20 cm
T_ChemSlab := 15 cm
C_CoagDoseMax := 40*mg/L
C_ChlorDoseAve := 1*mg/L
T_SedDividingWall := T_SedWall
T_SedChannelWall := T_SedWall
method := "EtFlocSedFiLow"
Mod := 0
# References:
# [reference: ExpertInputs.xmcd]
# [reference: MathFunctions.xmcd]
# [reference: PipeDatabase.xmcd]
# [reference: MaterialsDatabase.xmcd]
# [reference: FluidsFunctions.xmcd]
# [reference: SedimentationTank.xmcd]
# [reference: LFOM.xmcd]
# [reference: EntranceTankFlocculatorLow.xmcd]
# [reference: StackedRapidSandFilterLow.xmcd]
# [reference: ChemicalDoseController.xmcd]
# Resulting Values:
Q_Plant = 1 L/s
Q_PlantMaxLF = 6 L/s
Q_Train = 1 L/s
# Filter information:
N_Fi = 1
V_FiBw = 0.011 m/s
A_Fi = 0.279091 m^2
ND_FiPipe = 24 in
# Sed Tank Information:
N_SedTanks = 1
W_Sed = 1.06 m
L_Sed = 1.46821 m
ND_SedManifold = 3 in
# Entrance tank information:
L_Floc = 0.89781 m
L_Et = 0.520399 m
ND_RMPipe = 2 in
