Q_Plant := 30*L/s
# [reference: EtFlocSedFi.xmcd]
# Fluids Functions
## Reynolds Number
Re_pipetransition := 2100  # transition between laminar and turbulent flow
R_h(w, b, open) :=
    w*b/(w + 2*b) if open == 1
    w*b/(2*(w + b)) otherwise  # hydraulic radius
# Note: if open=1, the channel is open.
# Otherwise, the channel is assumed to have 4 wetted sides
R_hGen(A, WP) := A/WP  # area/(wetted perimeter)
Re_Pipe(Q, D, ν) := 4*Q/(π*D*ν)  # originally: Re == ρVl/μ , where l is a "characteristic length" (in this case l = D)
Re_rect(Q, w, b, ν, open) := 4*Q*R_h(w, b, open)/(w*b*ν)  # Reynolds number for rectangular channel; open = 0 if all sides are wetted; l = D and D = 4*R.h
# Reynolds number for general cross-section
Re_Gen(V, A, WP, ν) := 4*R_hGen(A, WP)*V/ν
## Friction Coefficient
f(Q, D, ν, ε) :=
    f ← 0.25/log(ε/(3.7*D) + 5.74/Re_Pipe(Q, D, ν)^0.9)^2 if Re_Pipe(Q, D, ν) > Re_pipetransition
    f ← 64/Re_Pipe(Q, D, ν) otherwise
    return f  # Swamee-Jain friction factor for turbulent flow; best for Re>3000 and ε/D < 0.02
# in general for laminar flow in pipe
f_rect(Q, w, b, ν, ε, open) :=
    f ← 0.25/log(ε/(3.7*4*R_h(w, b, open)) + 5.74/Re_rect(Q, w, b, ν, open)^0.9)^2 if Re_rect(Q, w, b, ν, open) > Re_pipetransition
    f ← 64/Re_rect(Q, w, b, ν, open) otherwise
    return f
# Swamee-Jain friction factor adapted for rectangular channel.
# D = 4R.h in this case.
# in general for laminar flow in rectangular channel
f_Gen(A, WP, V, ν, ε) :=
    f ← 0.25/log(ε/(3.7*4*R_hGen(A, WP)) + 5.74/Re_Gen(V, A, WP, ν)^0.9)^2 if Re_Gen(V, A, WP, ν) > Re_pipetransition
    f ← 64/Re_Gen(V, A, WP, ν) otherwise
    return f
# Swamee-Jain friction factor adapted for any cross-section.
# D = 4R.h
# in general for laminar flow for any cross-section
## Head Loss Calculations
# In a Pipe | In a Rectangular Channel | In the General Case
# major losses (caused by shear)
h_f(Q, D, L, ν, ε) := f(Q, D, ν, ε)*8/(g*π^2)*L*Q^2/D^5
h_frect(Q, w, b, L, ν, ε, open) := f_rect(Q, w, b, ν, ε, open)*L/(4*R_h(w, b, open))*Q^2/(2*g*(w*b)^2)
h_fGen(A, WP, V, L, ν, ε) := f_Gen(A, WP, V, ν, ε)*L/(4*R_hGen(A, WP))*V^2/(2*g)
# From Darcy-Weisbach h_f == f*L/D*V^2/(2*g)
# minor losses (caused by flow expansions)
h_e(Q, D, K) := K*8/(g*π^2)*Q^2/D^4
h_erect(Q, w, b, K) := K*Q^2/(2*g*(w*b)^2)
h_eGen(V, K) := K*V^2/(2*g)
# This is total head loss due to major and minor losses
h_l(Q, D, L, K, ν, ε) := h_e(Q, D, K) + h_f(Q, D, L, ν, ε)
h_lrect(Q, w, b, L, K, ν, ε, open) := h_erect(Q, w, b, K) + h_frect(Q, w, b, L, ν, ε, open)
h_lGen(V, WP, L, K, ν, ε) := h_eGen(V, K) + h_fGen(A, WP, V, L, ν, ε)
# ________________________________________________________________________________________________________
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# Pressure Coefficient:
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C_p(Q, D, L, K, ν, ε) := f(Q, D, ν, ε)*L/D + K
# This is total head loss through the manifold
HL_Manifold(Q, D, L, K, ν, ε, n) := h_l(Q, D, L, K, ν, ε)*(1/3 + 1/(2*n) + 1/(6*n^2))
h_frectreal(Q, w, L, ν, ε, open) :=
    h_temp ← 1 m
    h_tempprev ← h_frect(Q, w, h_temp, L, ν, ε, open)
    error ← 1
    while error > 0.01
        h_temp ← h_tempprev
        h_tempprev ← (f_rect(Q, w, h_temp, ν, ε, open)*L*Q^2*(2 + w/h_temp)/(8*g*(w/h_temp)^3))^(1/6)
        error ← 0 if h_tempprev == 0 m
        error ← |h_temp - h_tempprev|/mean(h_temp, h_tempprev) otherwise
    return h_tempprev
## Orifice Equations
A_circle(D_circle) := π*D_circle^2/4
D_circle(A_circle) := sqrt(4*A_circle/π)
Q_orifice(D, h, Pi_VenaContractaOrifice) :=
    Q ← Pi_VenaContractaOrifice*A_circle(D)*sqrt(2*g*h) if h > 0 cm
    Q ← 0*L/s otherwise
    return Q  # modified to report zero flows if the orifice isn't submerged!
Q_orificeV(D, h, Pi_VenaContractaOrifice) :=
    Q ← Pi_VenaContractaOrifice*sqrt(2*g)*integral(D*sin(acos(z/(D/2)))*sqrt(h - z), z = -D/2 .. min(D/2, h)) if h > (-D/2 + 10^-13*m)
    Q ← 0*L/s otherwise
    return Q
# equation 4-31 from the following website:
# http://il.water.usgs.gov/proj/feq/fequtl98.i2h/4_7aupdate.html
# The 10^-13m is required to prevent the integration function from failure due to some Mathcad numerical error. this adjustment is small enough to not cause an detectable error in the resulting flow rate.
h_orifice(D, Pi_VenaContractaOrifice, Q) := (Q/(Pi_VenaContractaOrifice*A_circle(D)))^2*1/(2*g)
A_orifice(h, Pi_VenaContractaOrifice, Q) := Q/(Pi_VenaContractaOrifice*sqrt(2*g*h))
n_orifices(Q_plant, Pi_VenaContractaOrifice, Δh_orifice, D_orifice) := ceil(A_orifice(Δh_orifice, Pi_VenaContractaOrifice, Q_plant)/A_circle(D_orifice))
d_orificemanifold(Q_manifoldratio, Q_tank, d_pipe, L_s, L_l, K_total, n_orifice, ν, ε, Pi_VenaContractaOrifice) := nthroot((1 - Q_manifoldratio)*d_pipe^4/(((K_total + f(Q_tank, d_pipe, ν, ε)*L_l/d_pipe)*Q_manifoldratio - K_total - f(Q_tank, d_pipe, ν, ε)*L_s/d_pipe)*Pi_VenaContractaOrifice^2*n_orifice^2), 4)
Q_transition(D, ν) := π*D*Re_pipetransition*ν/4
# Hagen-Poiseuille
Q_hagen(D, h_f, L, ν) := π*D^4/(128*ν)*g*h_f/L
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Q_SJ(D, h_f, L, ν, ε) := -π/sqrt(2)*D^(5/2)*sqrt(g*h_f/L)*log(ε/(3.7*D) + 2.51*ν*sqrt(L/(2*g*h_f*D^3)))
Q_pipemajor(D, h_f, L, ν, ε) :=
    Q_hagen(D, h_f, L, ν) if Q_hagen(D, h_f, L, ν) < Q_transition(D, ν)
    Q_SJ(D, h_f, L, ν, ε) otherwise  # This function calculates the flow through a pipe under either laminar or turbulent flow when there are only major losses
Q_pipeminor(D, h_e, K) := A_circle(D)*sqrt(2*g*h_e/K)
# This function uses iteration to calculate the flow through a pipe system. It works for laminar or turbulent flow.
Q_pipetotal(D, h_l, L, ν, ε, K) :=
    Q_tempprev ← Q_pipemajor(D, h_l, L, ν, ε) if K == 0
    otherwise
        Q_temp ← 0*m^3/s
        error ← 1
        Q_tempprev ← min(Q_pipemajor(D, h_l, L, ν, ε), Q_pipeminor(D, h_l, K))
        while error > 0.01
            Q_temp ← Q_tempprev
            h_fnew ← h_l*h_f(Q_temp, D, L, ν, ε)/(h_f(Q_temp, D, L, ν, ε) + h_e(Q_temp, D, K))
            Q_tempprev ← Q_pipemajor(D, h_fnew, L, ν, ε)
            error ← 0 if Q_tempprev == 0*m^3/s
            error ← |Q_temp - Q_tempprev|/mean(Q_temp, Q_tempprev) otherwise
    return Q_tempprev
# get a better estimate of the major losses. Adjust it by the ratio of the actual head loss to the calculated total head loss
## Flow Equations
## Pipe Diameter Equations
# D.Hagen is only valid for laminar flow
D_Hagen(Q, h_f, L, ν) := (128*ν*Q*L/(g*h_f*π))^(1/4)
# D.Swamee is only valid for turbulent flow
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D_Swamee(Q, h_f, L, ν, ε) := 0.66*(ε^(5/4)*(L*Q^2/(g*h_f))^4.75 + ν*Q^9.4*(L/(g*h_f))^5.2)^0.04
# Only including major losses but valid for laminar or turbulent flow
D_PipeMajor(Q, h_f, L, ν, ε) :=
    D_Laminar ← D_Hagen(Q, h_f, L, ν)
    D_PipeMajor ← D_Laminar if Re_Pipe(Q, D_Laminar, ν) ≤ Re_pipetransition
    D_PipeMajor ← D_Swamee(Q, h_f, L, ν, ε) otherwise
    return D_PipeMajor
D_PipeMinor(Q, h_e, K) := (4*Q/π)^(1/2)*(K/(2*g*h_e))^(1/4)  # This is the same for laminar and turbulent flow
# This function uses iteration to calculate the pipe diameter required given a set of flow and pipe constraints. This is for sizing a pipe given both major and minor losses and is applicable for both laminar and turbulent flow.
D_PipeTotal(Q, h_l, L, ν, ε, K) :=
    D_Temp ← D_PipeMajor(Q, h_l, L, ν, ε) if K == 0
    otherwise
        D_Temp ← max(D_PipeMajor(Q, h_l, L, ν, ε), D_PipeMinor(Q, h_l, K))
        error ← 1
        while error > 0.001
            D_TempPrev ← D_Temp
            h_fnew ← h_l*h_f(Q, D_Temp, L, ν, ε)/(h_f(Q, D_Temp, L, ν, ε) + h_e(Q, D_Temp, K))
            D_Temp ← D_PipeMajor(Q, h_fnew, L, ν, ε)
            error ← |D_Temp - D_TempPrev|/mean(D_Temp, D_TempPrev)
    return D_Temp
# The functions below could easily be simplied using the function above to eliminate iteration.
# We should create one more function that returns a pipe diameter given a set of available pipes and then eliminate the functions below.
D_pipe(Q, D_available, h_l, L, ν, ε, K) :=
    i ← 0
    while Q > Q_pipetotal(D_available[i], h_l, L, ν, ε, K)
        i ← i + 1
    return D_available[i]
D_pipeschedule(Q, PipeSpecification, h_l, L, ν, ε, K) :=
    D_available ← AvailPipeSizes(PipeSpecification)[:, 0]
    i ← 0
    while Q > Q_pipetotal(D_available[i], h_l, L, ν, ε, K)
        i ← i + 1
    return AvailPipeSizes(PipeSpecification)[:, 1][i]
# Given pipe spec will return nominal pipe size!
D_nextlargest(D, D_available) :=
    i ← 0
    while D_available[i] < D
        i ← i + 1
        break if i == last(D_available)
    return D_available[i]
Dpipelarger(D, D_available) :=
    i ← 0
    while D_available[i] ≤ D
        i ← i + 1
        break if i == last(D_available)
    return D_available[i]
# This one rounds up even if the given pipe size is exactly correct to make it possible to go to a larger pipe if the given pipe isn't actually adequate. It is currently used in the pipe launder program
# This calculates an internal diameter of a pipe for a given pressure recovery constraint. This is useful to design manifolds where major losses are negligible.
ID_Manifold(Q_Manifold, PR_Max) := sqrt(Q_Manifold/(π/4*sqrt(2*g*PR_Max)))
# returns minimum manifold ID (doesn't account for available sizes)
D_Manifold(Q, h, L_manifold, Q_ratio, ν, ε, K, n) :=
    D_new ← 2 in
    D_old ← 0 in
    error ← 1
    while error > 0.01
        D_old ← D_new
        D_new ← (8*Q^2/(g*π^2*h)*(1 + (f(Q, D_old, ν, ε)*L_manifold/D_old + K)*(1/3 + 1/(2*n) + 1/(6*n^2)))/(1 - Q_ratio^2))^(1/4)
        error ← |D_old - D_new|/mean(D_old, D_new)
    return D_new
ND_Manifold(Q, h, L_manifold, Q_ratio, PipeSpecification, ν, ε, K, n) := NominalDiameter(D_Manifold(Q, h, L_manifold, Q_ratio, ν, ε, K, n), PipeSpecification)
# Given pipe spec will return nominal pipe size!
# This gives a good estimate for the area
# of the manifold.
A_Manifold(Q, h, L_manifold, Q_ratio, ν, ε, K, n) := D_Manifold(Q, h, L_manifold, Q_ratio, ν, ε, K, n)^2*π/4
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D_TankDrain(L_Tank, W_Tank, H_Tank, Ti_Drain, K) := sqrt(8*L_Tank*W_Tank/(π*Ti_Drain))*(K*H_Tank/(2*g))^(1/4)
ND_EqualParallelFlow(Q, Q_ratio, h_max, L_min, L_max, K_min, K_max, PipeSpecification, ν, ε) :=
    D_available ← AvailPipeSizes(PipeSpecification)[:, 0]
    D_new ← D_available[0]
    D_old ← 0 in
    error ← 1
    while error > 0.01
        D_old ← D_new
        ΔC_p ← K_max - K_min + f(Q, D_old, ν, ε)*(L_max - L_min)/D_old
        D_new ← (8/(g*π^2*h_max)*ΔC_p*Q_ratio^2/(1 - Q_ratio^2))^(1/4)*sqrt(2*Q/(1 + Q_ratio))
        error ← |D_old - D_new|/mean(D_old, D_new)
    return NominalDiameter(D_new, PipeSpecification)
# This function provides equal flow between parallel pipes
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D_orifices(HL_Launder, Q_Plant, D_Launder, N_Orifices, HW_SedTank, K_Orifice) := D_circle(A_orifice(HW_SedTank - HL_Launder - Q_Plant^2/(2*g*A_circle(D_Launder)^2), K_Orifice, Q_Plant/N_Orifices))
# manifold is 0 for a channel that has constant flow. Manifold is 1 for a channel that has inflow along the length of the channel
W_HorizChannel(Q, H, ΔH, L_Channel, ν, ε, manifold) :=
    ΔH_Local ← min(ΔH, 1/3*H)
    W_new ← Q/((H - ΔH_Local)*sqrt(2*g*ΔH_Local))
    error ← 1
    i ← 0
    while (error > .001) and (i < 20)
        W ← W_new
        i ← i + 1
        W_new ← sqrt((1 + f_rect(Q, W, H - ΔH_Local, ν, ε, 1)*L_Channel/(4*R_h(W, H - ΔH_Local, 1))*(1 - 2*manifold/3))/(2*g*ΔH_Local))*Q/(H - ΔH_Local)
        error ← |W_new - W|/(W_new + W)
    return W_new
# The head loss in the channel is 1/3 the head loss that is calculated in a rectangular channel for the case of manifold flow because channel is receiving flow all along the channel. Thus the (1 - 2*manifold/3) factor is from manifold analysis.
#
# The width is based on conservation of energy assuming that the velocity at the upstream end of the channel is zero.
# Note that it isn't possible for ΔH to be larger than 1/3H because that would require supercritical flow in the channel and that isn't possible because the bottom slope of this channel is horizontal.
#
# Thus you can obtain the minimum possible width by entering a large ΔH
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W_HorizChannelMin(Q, H, L_Channel, ν, ε, manifold) := W_HorizChannel(Q, H, H/3, L_Channel, ν, ε, manifold)
# This function finds the minimum channel width. To create a safety factor I'd suggest using an H that is slightly reduced from the actual available H. For example, for a 20 cm deep channel, consider using 18 cm.
H_HorizChannel(Q, W_Channel, ΔH, L_Channel, ν, ε, manifold) :=
    H_new ← Q/(W_Channel*sqrt(2*g*ΔH)) + ΔH
    error ← 1
    i ← 0
    while (error > .001) and (i < 200)
        H ← H_new
        ΔH_Local ← min(ΔH, 1/3*H)
        i ← i + 1
        H_new ← Q/W_Channel*sqrt((1 + f_rect(Q, W_Channel, H - ΔH_Local, ν, ε, 1)*L_Channel/(4*R_h(W_Channel, H - ΔH_Local, 1))*(1 - 2*manifold/3))/(2*g*ΔH_Local)) + ΔH_Local
        error ← |H_new - H|/(H_new + H)
    return H_new
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H_HorizChannelMin(Q, W_Channel, L_Channel, ν, ε, manifold) :=
    H_new ← Q/(W_Channel*sqrt(2*g*5*m)) + 5 m
    error ← 1
    i ← 0
    while (error > .001) and (i < 200)
        H ← H_new
        ΔH_Local ← H/3
        i ← i + 1
        H_new ← Q/W_Channel*sqrt((1 + f_rect(Q, W_Channel, H - ΔH_Local, ν, ε, 1)*L_Channel/(4*R_h(W_Channel, H - ΔH_Local, 1))*(1 - 2*manifold/3))/(2*g*ΔH_Local)) + ΔH_Local
        error ← |H_new - H|/(H_new + H)
    return H_new
# The function below calculates the depth of a channel given a ratio of channel H/W (Π.Channel) and change in depth in the channel from one end to the other.
H_HorizChannelΠ(Q, Π_Channel, ΔH, L_Channel, ν, ε, manifold) :=
    H_new ← sqrt(Q/(Π_Channel*sqrt(2*g*ΔH)))
    W_new ← H_new/Π_Channel
    error ← 1
    i ← 0
    while (error > .001) and (i < 20)
        H ← H_new
        W_new ← H_new/Π_Channel
        ΔH_Local ← min(ΔH, 1/3*H)
        i ← i + 1
        H_new ← (ΔH_Local + sqrt(ΔH_Local^2 + 4*Q*Π_Channel*sqrt((1 + f_rect(Q, W_new, H - ΔH_Local, ν, ε, 1)*L_Channel/(4*R_h(W_new, H - ΔH_Local, 1))*(1 - 2*manifold/3))/(2*g*ΔH_Local))))/2
        error ← |H_new - H|/(H_new + H)
    return H_new
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W_HorizChannelΠ(Q, Π_Channel, ΔH, L_Channel, ν, ε, manifold) := H_HorizChannelΠ(Q, Π_Channel, ΔH, L_Channel, ν, ε, manifold)/Π_Channel
# This directly calculates the Width of a channel given a desired aspect ratio.
H_HorizChannelΠMin(Q, Π_Channel, L_Channel, ν, ε, manifold) :=
    ΔH_Large ← 5 m
    H_new ← sqrt(Q/(Π_Channel*sqrt(2*g*ΔH_Large)))
    W_new ← H_new/Π_Channel
    error ← 1
    i ← 0
    while (error > .001) and (i < 20)
        H ← H_new
        W_new ← H_new/Π_Channel
        ΔH_Local ← H/3
        i ← i + 1
        H_new ← (ΔH_Local + sqrt(ΔH_Local^2 + 4*Q*Π_Channel*sqrt((1 + f_rect(Q, W_new, H - ΔH_Local, ν, ε, 1)*L_Channel/(4*R_h(W_new, H - ΔH_Local, 1))*(1 - 2*manifold/3))/(2*g*ΔH_Local))))/2
        error ← |H_new - H|/(H_new + H)
    return H_new
W_HorizChannelΠMin(Q, Π_Channel, L_Channel, ν, ε, manifold) := H_HorizChannelΠMin(Q, Π_Channel, L_Channel, ν, ε, manifold)/Π_Channel
## Horizontal Channel Functions
## Weir Head Loss
# H (or head loss in the equation below) is the difference in height between the water upstream of the weir and the top of the weir.
W_rectweir(Q, H) := 3/2*Q/(Pi_VenaContractaOrifice*sqrt(2*g)*H^(3/2))
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Headloss_weir(Q, W) := (3/2*Q/(Pi_VenaContractaOrifice*sqrt(2*g)*W))^(2/3)
Q_RectWeir(H, W) := 2/3*Pi_VenaContractaOrifice*sqrt(2*g)*H^(3/2)*W
# Page 681 of Fundamentals of Fluid Mechanics: Bernoulli Equation
# Flow over a broad crested weir: | For a pipe, W is the circumference of the pipe.
HW_Critical(Q, W) := (Q/(W*g^(1/2)))^(2/3)
V_Horizontal(HW_Critical) := (g*HW_Critical)^(1/2)
R_Fountain(ND_Pipe, H_PipeAboveSurface, V_Horizontal) :=
    PipeContribution ← outerradius(ND_Pipe)
    time ← (H_PipeAboveSurface*2/g)^(1/2)
    displacement ← V_Horizontal*time
    R_Fountain ← displacement + PipeContribution
    return R_Fountain
S_PipeStubWeir(Q, ND_Pipe, H_PipeAboveSurface, SF, PipeSpecification) :=
    Rad ← (outerradius(ND_Pipe) + innerR(ND_Pipe, PipeSpecification))/2
    circumference ← Rad*2*π
    PipeRadius ← outerradius(ND_Pipe)
    yc ← HW_Critical(Q, circumference)
    vel ← V_Horizontal(yc)
    FountainRadius ← R_Fountain(ND_Pipe, H_PipeAboveSurface, vel)
    Spacing ← SF*FountainRadius
    return Spacing
H_Fall := L_FiExitPipeStub - SocketDepth(ND_FiTrunk) = 0.191803 m
S_PipeStubWeir(Q_Plant/3, ND_FiTrunk, H_Fall, 1, PS_Default) = 0.184057 m
## Energy Dissipation Control Equations
# These equations are to control floc break up.
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D_PipeED(ED, Q, Pi_VenaContractaOrifice, Pi_Jet) := (Pi_Jet*4*Q/(π*ED^(1/3)))^(3/7)*1/sqrt(Pi_VenaContractaOrifice)
ND_PipeED(ED, Q, Pi_VenaContractaOrifice, Pi_Jet, PipeSpecification) := NominalDiameter(D_PipeED(ED, Q, Pi_VenaContractaOrifice, Pi_Jet), PipeSpecification)
Q_PipeED(ED, D, Pi_VenaContractaOrifice, Pi_Jet) := π*D^(7/3)*ED^(1/3)*Pi_VenaContractaOrifice^(7/6)/(4*Pi_Jet)
# This function is the same as the one below called Q.PipeMaxED.
# Maximum flow through manifold pipe
V_PipeMaxED(ED, A, Pi_VenaContractaOrifice, Pi_Jet) :=
    for i ∈ 0 .. last(A)
        V[i] ← Pi_VenaContractaOrifice/Pi_Jet*(2*ED*sqrt(A[i]*Pi_VenaContractaOrifice)/π)^(1/3)
    return V
findindexQ(Q, Q_array) :=
    i ← 0
    while Q_array[i] < Q
        i ← i + 1
    return i
# This function gives us an index in an array of the pipe size that insures a flow rate greater than  flow rate Q
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ED_Port(Q_Port, D_Port, Pi_VenaContractaOrifice, Pi_Jet) := (Q_Port/(D_Port^(7/3)*Pi_VenaContractaOrifice^(7/6))*4*Pi_Jet/π)^3
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# This function gives us the energy dissipation rate in the inlet channel following the expansion through the entrance port.
ED_Channel(V_Channel, H_Channel, Pi_VenaContractaOrifice, Pi_Jet) := (Pi_Jet*V_Channel/Pi_VenaContractaOrifice)^3/(H_Channel*Pi_VenaContractaOrifice)
V_Channel(ED_Channel, H_Channel, Pi_VenaContractaOrifice, Pi_Jet) := Pi_VenaContractaOrifice/Pi_Jet*(ED_Channel*Pi_VenaContractaOrifice*H_Channel)^(1/3)
# This function gives us the average velocity in the inlet channel before any water has exited through an inlet manifold pipe.
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# This function gives us the area of the inlet channel given the flow rate and the energy dissipation rate.
A_Channel(Q_Plant, ED_Channel, Pi_VenaContractaOrifice, Pi_Jet) := (Pi_Jet*Q_Plant/(Pi_VenaContractaOrifice^(4/3)*ED_Channel^(1/3)))^(6/7)
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H_Channel(Q_Plant, W_Channel, ED_Channel, Pi_VenaContractaOrifice, Pi_Jet) := (Pi_Jet*Q_Plant/W_Channel)^(3/4)/(Pi_VenaContractaOrifice*ED_Channel^(1/4))
# This function gives us the height of the inlet channel once the width is known.
W_Channel(Q_Plant, H_Channel, ED_Channel, Pi_VenaContractaOrifice, Pi_Jet) := Pi_Jet*Q_Plant/(H_Channel*Pi_VenaContractaOrifice*ED_Channel^(1/4))^(4/3)
## Manifold Equation
Q_ports(A_Manifold, A_Port, N_Ports, Q_Manifold, L_Manifold, B_Port, Pi_vc, ν, ε_Roughness) :=
    Q_Port ← Q_Manifold/N_Ports
    D_Manifold ← D_circle(A_Manifold)
    V[0] ← Q_Manifold/A_Manifold
    Q_m[0] ← Q_Manifold
    H_m[0] ← 1/(2*g)*(Q_Manifold/(N_Ports*Pi_vc*A_Port))^2
    maxerror ← 0.00001
    error ← 1
    while error > maxerror
        for i ∈ 0 .. N_Ports - 1
            Q_p[i] ← Pi_vc*A_Port*sqrt(2*g*H_m[i])
            V[i + 1] ← max(V[i] - Q_p[i]/A_Manifold, 0.0000001*m/s)
            Q_m[i + 1] ← A_Manifold*V[i + 1]
            ΔH_Exp ← (V[i] - V[i + 1])*V[i + 1]/g
            H_m[i + 1] ← max(H_m[i] + ΔH_Exp - h_f(Q_m[i + 1], D_Manifold, B_Port, ν, ε_Roughness), 0.0000001 mm)
        error ← ((Q_Manifold/sum(Q_p))^2 - 1)^2
        H_m[0] ← H_m[0]*(1 + 0.001*((Q_Manifold - sum(Q_p))/Q_Manifold))
    return Q_p
## Sizing a pipe to be used as a channel
# This is the requirement that there must be sufficient head available to accelerate the flow to the critical velocity
Q_Max(D, θ) := ((D/2)^2*(θ - sin(θ)*cos(θ)))*sqrt(D/2*(1 + cos(θ))*2*g)
# Set the two equations for Q equal and simplify. The result is
f(θ) := (θ - sin(θ)*cos(θ))/(4*sin(θ)*(1 + cos(θ))) - 1
# Use the root find function to get the value of θ. Note that θ is independent of the pipe diameter.
θguess := 3 rad
θ := root(f(θguess), θguess) = 1.95761  # This is the angle in radians corresponding to the maximum critical depth
# Now solve the max flow equation for the Diameter given θ.
D_PipeChannel(Q, EN_PipeSpec) :=
    D ← 2*(Q/((θ - sin(θ)*cos(θ))*sqrt((1 + cos(θ))*2*g)))^(2/5)
    D ← NominalDiameter(D, EN_PipeSpec)
    return D
# This was added to find the pipe size needed for the low flow plant drain pipe
D_PipeOpenFlow(Q, h_e, L, n, EN_PipeSpec) :=
    D ← (n*Q/(h_e/L)^(1/2)*2^(13/3)/π)^(3/8)*(s^(3/8)/m^(1/8))
    D ← NominalDiameter(D, EN_PipeSpec)
    return D
# Carman Kozeny Sand Bed Head Loss
h_lKozeny(L, D, V, ε, ν) := k_Kozeny*L*ν/g*(1 - ε)^2/ε^3*36/D^2*V
# Rectangular Duct Functions
# Derivation:
R_h == w*h/(2*(w + h))
D_h == 4*R_h
W_SquareDuct(Q, h_f, L, ν, ε) :=
    width ← (32*ν*L*Q/(g*h_f))^(1/4)
    while h_frect(Q, width, width, L, ν, ε, 0) > h_f
        width ← width + 1 cm
    return width
h_f == f*L/(4*R_h)*V^2/(2*g)
f == 64/(V*D_h/ν)  # This assumes laminar flow; however, most flows within ducts will end up being turbulent. The actual function safeguards against this.
h_f == 64/(V*4*R_h/ν)*L/(4*R_h)*V^2/(2*g)
R_h^2 == 2*L*Q/A*ν/(g*h_f)
(w*h/(2*(w + h)))^2 == 2*L*Q/(w*h)*ν/(g*h_f)
(w*h)^3/(4*(w + h)^2) == 2*L*Q*ν/(g*h_f)
# if duct is square...
w^6/(4*4*w^2) == 2*L*Q*ν/(g*h_f)
w == (32*L*Q*ν/(g*h_f))^(1/4)
