# [reference: LMFSRSF_mrf222.xmcd]
# [reference: SRSFmrf222TEST.xmcd]
# Do we want this?
# [reference: LinearCdc.xmcd]
# [reference: ChemStorageTanks.xmcd]
# These are the codes that take MathCAD outputs and create AutoCAD scripts that are used to draw the plant (formerly Basics)
# [reference: MtoATranslators.xmcd]
# The wrapped MtoA translator contains the functions that the user will want to access. These functions will draw pieces with full functionality - specifying the location, dimension, and orientation of the object. Also, it contains layer control and subtraction capabilities for grouped objects.
# [reference: MtoATranslatorsWrapped.xmcd]
# [reference: ChannelF.xmcd]
# [reference: PlumbingF.xmcd]
# [reference: TankF.xmcd]
# [reference: StairsF.xmcd]
# [reference: DrainChannelF.xmcd]
# AutoCAD Script Files:
# [reference: FlocculatorAC.xmcd]
# [reference: SedTankRemoveBotSlab.xmcd]
# [reference: EntranceTankAC.xmcd]
# [reference: ChemStockTanksAC.xmcd]
# Low Flow Stacked Rapid Sand Filter for Application in low range of medium flow plants
# Origins
# Plant origin probably needs to be the edge of the sed tank
FiInletChannel_Origin := [
    Plant_Origin[0] - L_Sed + L_FiInletChannel;
    Plant_Origin[1] - 2*T_PlantWall - W_FiInletChannel;
    Z_FiInletChannelBottom
]  # We may want to put in a front box as in the SRSF.
FiPipe_Origin := [
    Tank_Origin[0] - L_Wall + ConRadius(ND_FiInlet) + L_FiPipeToOutletVertCenterLine*cos(AN_FiIn) + S_Fitting/4;
    FlowDistributionTank_Origin[1] + L_FiDistTank - 2*ConRadius(ND_FiInlet) - outerradius(ND_FiPipe) - 1.5*S_Fitting;
    Tank_Origin[2] + H_Wall + T_FiCap + T_Flange + T_TankWall + FiLift
]
Fi_origin := [
    FiInletChannel_Origin[0] - L_FiInletChannel + S_Fitting + ConRadius(ND_FiManPipe);
    FiInletChannel_Origin[1] + S_Fitting + ConRadius(ND_FiManPipe) - 3*ElbowRadius(ND_FiManPipe) - 4*SocketDepth(ND_FiManPipe) - SocketDepth(ND_FiManTrunk) - L_FiBallValve*ND_FiManTrunk/(2 in) + ValveSocket(ND_FiManTrunk) - L_FiOuterBulkFitting*ND_FiManTrunk/(1 in) - L_FiManTrunk/2 - (.0042 m*(ND_FiManTrunk/(1 in)));
    Z_FiBottom
]
# correction of angles
L_FiPipeInHalf := BulkheadThreadLength(ND_FiManTrunk) - L_FiManBulkheadOffset + BallValveLength(ND_FiManTrunk) - BallValveSocket(ND_FiManTrunk) + 2*SocketDepth(ND_FiInlet) + 2*SocketDepth(ND_FiManTrunk)
L_FiPipeInRest := 2*ElbowRadius(ND_FiInlet) + 2*SocketDepth(ND_FiInlet) + ElbowRadius(ND_FiInlet) + innerdiameter(ND_FiPipe, PS_Fi)/2
L_FiPipeToInletVertCenterLine := L_FiPipeInHalf + L_FiPipeInRest
L_FiPipeToOutletVertCenterLine := (cos(AN_FiIn)*L_FiPipeToInletVertCenterLine + S_Fitting + 2*ConRadius(ND_FiInlet))/cos(AN_FiIn)
X_OutletOffset := -L_FiPipeToOutletVertCenterLine*cos(AN_FiIn) + L_FiPipeToOutletVertCenterLine
Y_OutletOffset := L_FiPipeToOutletVertCenterLine*sin(AN_FiIn)
X_InletOffset := -L_FiPipeToInletVertCenterLine*cos(AN_FiIn) + L_FiPipeToInletVertCenterLine
Y_InletOffset := -(L_FiPipeToInletVertCenterLine*sin(AN_FiIn))
AN_Bw := 215 deg
AN_BwMod := AN_Bw - 180 deg = 35 deg
L_FiBwVertCenterLine := (L_FiPipeToInletVertCenterLine*cos(AN_FiIn) - (2*S_Fitting + ConRadius(ND_FiBwDrain) + T_Et + ConRadius(ND_FiInlet)))/cos(AN_BwMod)
# Storage Tank, Entrance Tank, Distribution Channel
FiLift := 1.07*(ShortTeeLength(ND_FiInlet) + 2*SocketDepth(ND_FiInlet) + 2*SocketDepth(ND_FiDrainValve) + BallValveLength(ND_FiDrainValve))
Tank_Origin := [0; 0; 0]*m
FlowDistributionTank_Origin := Tank_Origin + [-L_Wall + W_FiDistTank; 0; H_Wall + H_DistChanAboveFi + T_Floor + FiLift]
FlowMeteringTank_Origin := [Tank_Origin[0]; Tank_Origin[1]; FlowDistributionTank_Origin[2] + H_DistChanBottomToEt]
RoomLyr := layer_new("Room", grey)
Room := Tank(Tank_Origin + [0; 0; H_Wall + T_TankWall], [L_Wall + L_Cantilever; W_Wall; H_Room], T_TankWall)
HatchLedge := BoxF([-(W_ChemPlatform*3/4); W_Wall - 1.05*ConRadius(ND_FiInlet) - S_Fitting; H_Wall] + Tank_Origin, [
    -(W_ChemPlatform*5/4);
    W_Wall - 1.05*ConRadius(ND_FiInlet) - S_Fitting - S_Walkway;
    H_Wall + T_TankWall + S_Fitting
] + Tank_Origin, [0; 0; 0]*deg)
RoomFrz := FreezeLayer("Room")
HatchLedgeCut := BoxF([-(W_ChemPlatform*3/4) - 10 cm; W_Wall - 1.05*ConRadius(ND_FiInlet) - 3*S_Fitting; H_Wall] + Tank_Origin, [
    -(W_ChemPlatform*5/4) + 10 cm;
    W_Wall - 1.05*ConRadius(ND_FiInlet) - S_Walkway + S_Fitting;
    H_Wall + T_TankWall + S_Fitting
] + Tank_Origin, [0; 0; 0]*deg)
DrainWedge := WedgeF([-L_Wall + ConRadius(ND_SystemDrain) + outerradius(ND_SystemDrain); W_Wall; H_Wall + T_TankWall] + Tank_Origin, [
    -L_Wall + 3*ConRadius(ND_SystemDrain) + outerradius(ND_SystemDrain);
    W_Wall - 2*outerradius(ND_SystemDrain);
    H_Wall + T_TankWall - outerradius(ND_SystemDrain)
] + Tank_Origin, [270; 0; 0]*deg)
SubtractDrainWedge := SubtractF(["Room"], "DeleteMe")
HatchLyr := layer_new("StorageHatch", ltgrey)
HatchBox := BoxSUBF([
    -(W_ChemPlatform*3/4) - 5 cm;
    W_Wall - 1.05*ConRadius(ND_FiInlet) - 2*S_Fitting;
    H_Wall + T_TankWall + S_Fitting
] + Tank_Origin, [-(W_ChemPlatform*5/4) + 5 cm; W_Wall - 1.05*ConRadius(ND_FiInlet) - S_Walkway; H_Wall + T_TankWall] + Tank_Origin, [0; 0; 0]*deg, ["Room"])
HatchFrz := FreezeLayer("StorageHatch")
DoorLyr := layer_new("Door", red)
DoorBox := BoxSUBF([-W_ChemPlatform; W_Wall; H_Wall + T_TankWall + 6 cm] + Tank_Origin, [-W_ChemPlatform/2; T_TankWall + W_Wall; H_Wall + T_TankWall + 6.5 ft] + Tank_Origin, [0; 0; 0]*deg, ["Room"])
Z_DoorTop := Tank_Origin[2] + H_Wall + T_TankWall + 6.5 ft
DoorFrz := FreezeLayer("Door")
Door := stack(DoorLyr, DoorBox, DoorFrz)
StorageTankLyr := layer_new("StorageTank", grey)
6.5 ft = 1981.2 mm
FiTank := Tank(Tank_Origin, [L_Wall; W_Wall; H_Wall], T_TankWall)
FiTankWeir := BoxF([0; W_Wall - W_ChlorineContact; 0] + Tank_Origin, [-L_Wall; W_Wall - W_ChlorineContact - 15 cm; H_ChlorineContactWeir] + Tank_Origin, [0; 0; 0]*deg)
StorageTanksFrz := FreezeLayer("StorageTank")
FlowMeteringTankLyr := layer_new("FlowMeteringTank", grey)
FlowMeteringTank := Tank(FlowMeteringTank_Origin, [L_Et; W_Et; H_Et], T_Et)
FlowMeteringTankFrz := FreezeLayer("FlowMeteringTank")
BaffleLyr := layer_new("Baffle", purple)
Baffle := BoxSUBF([-2*(S_Fitting/4 + ConRadius(ND_EtOverflow)); -S_Fitting; 1.5*S_Fitting] + FlowMeteringTank_Origin, [-2*(S_Fitting/4 + ConRadius(ND_EtOverflow)) - T_SedWeir; W_Et + S_Fitting; H_Et] + FlowMeteringTank_Origin, [0; 0; 0]*deg, ["FlowMeteringTank"])
BaffleFrz := FreezeLayer("Baffle")
EtOverflowCoupling_Origin := [-ConRadius(ND_EtOverflow); ConRadius(ND_EtOverflow); -SocketDepth(ND_EtOverflow)] + FlowMeteringTank_Origin
EtOverflowElbowUnder_Origin := [
    EtOverflowCoupling_Origin[0];
    EtOverflowCoupling_Origin[1];
    FlowDistributionTank_Origin[2] - max(CouplingLength(ND_RMPipe), T_Et) - 2*SocketDepth(ND_RMPipe) - ElbowRadius(ND_RMPipe)
]
EtOverflowDrainElbow_Origin := [
    FlowDistributionTank_Origin[0] - S_Fitting - ConRadius(ND_EtOverflow) - ElbowRadius(ND_EtOverflow);
    EtOverflowElbowUnder_Origin[1];
    -2*ElbowRadius(ND_EtOverflow) + EtOverflowElbowUnder_Origin[2]
]
EtOverflowDrainFitLyr := layer_new("EtOverflowDrainFittings", green)
EtOverflowCoupling := CouplingSUBF(EtOverflowCoupling_Origin, [0; 270; 0]*deg, ND_EtOverflow, PS_Fi, ["FlowMeteringTank"])
EtOverflowElbowUnder := ElbowF(EtOverflowElbowUnder_Origin, [0; 0; 270]*deg, ND_EtOverflow, PS_Fi)
EtOverflowDrainElbow := ElbowF(EtOverflowDrainElbow_Origin, [180; 0; 270]*deg, ND_EtOverflow, PS_Fi)
EtOverflowDrainFitFrz := FreezeLayer("EtOverflowDrainFittings")
EtOverflowDrainFit := stack(EtOverflowDrainFitLyr, EtOverflowCoupling, EtOverflowElbowUnder, EtOverflowDrainElbow, EtOverflowDrainFitFrz)
EtOverflowDrainPipeLyr := layer_new("EtOverflowDrainPipes", blue)
L_EtOverflowPipe := SocketDepth(ND_EtOverflow) + H_Et - H_Freeboard + HL_EtOverflow/2
EtOverflowPipe := PipeF(EtOverflowCoupling_Origin, L_EtOverflowPipe, [0; 90; 0]*deg, ND_EtOverflow, PS_Fi)
L_EtOverflowPipeUnder := EtOverflowCoupling_Origin[2] - CouplingLength(ND_EtOverflow) + 2*SocketDepth(ND_EtOverflow) - EtOverflowElbowUnder_Origin[2]
EtOverflowPipeUnder := PipeSUBF(EtOverflowCoupling_Origin + [0; 0; -CouplingLength(ND_EtOverflow) + 2*SocketDepth(ND_EtOverflow)], L_EtOverflowPipeUnder, [0; 270; 0]*deg, ND_EtOverflow, PS_Fi, ["FlowMeteringTank"])
L_EtOverflowPipeWall := EtOverflowElbowUnder_Origin[0] - EtOverflowDrainElbow_Origin[0] - 2*ElbowRadius(ND_EtOverflow)
EtOverflowPipeWall := PipeF(EtOverflowElbowUnder_Origin + [-ElbowRadius(ND_EtOverflow); 0; -ElbowRadius(ND_EtOverflow)], L_EtOverflowPipeWall, [0; 0; 0]*deg, ND_EtOverflow, PS_Fi)
L_EtOverflowPipeDrain := EtOverflowDrainElbow_Origin[2] - Tank_Origin[2] - H_Wall - T_TankWall - H_DrainChannel
EtOverflowPipeDrain := PipeF(EtOverflowDrainElbow_Origin, EtOverflowDrainElbow_Origin[2] - Tank_Origin[2] - H_Wall - T_TankWall - H_DrainChannel, [0; 270; 0]*deg, ND_EtOverflow, PS_Fi)
EtOverflowDrainPipeFrz := FreezeLayer("EtOverflowDrainPipes")
EtOverflowDrainPipes := stack(EtOverflowDrainPipeLyr, EtOverflowPipe, EtOverflowPipeUnder, EtOverflowPipeWall, EtOverflowPipeDrain, EtOverflowDrainPipeFrz)
EtOverflow := stack(EtOverflowDrainFit, EtOverflowDrainPipes)
SystemCoupling_Origin := [
    T_Et - SocketDepth(ND_Transmission);
    W_Et - ConRadius(ND_Transmission) - S_Fitting;
    ConRadius(ND_Transmission)
] + FlowMeteringTank_Origin
SystemInletFitLyr := layer_new("SystemInletCoupling", green)
SystemInletCoupling := CouplingSUBF(SystemCoupling_Origin, [180; 0; 270]*deg, ND_Transmission, PS_Fi, ["FlowMeteringTank"])
SystemInletFitFrz := FreezeLayer("SystemInletCoupling")
SystemInletPipeLyr := layer_new("SystemInletPipes", blue)
SystemInletPipe := PipeSUBF(SystemCoupling_Origin + [W_Et; 0; 0], W_Et, [0; 0; 0]*deg, ND_Transmission, PS_Fi, ["Room"])
SystemInletPipeFrz := FreezeLayer("SystemInletPipes")
EtScript := stack(FlowMeteringTankLyr, FlowMeteringTank, FlowMeteringTankFrz, EtOverflow, BaffleLyr, Baffle, BaffleFrz, SystemInletFitLyr, SystemInletCoupling, SystemInletFitFrz, SystemInletPipeLyr, SystemInletPipe, SystemInletPipeFrz)
DistTankLyr := layer_new("FlowDistributionTank", grey)
FlowDistributionTank := Tank(FlowDistributionTank_Origin, [W_FiDistTank; L_FiDistTank; H_FiDistTank], T_Et)
DistTankFrz := FreezeLayer("FlowDistributionTank")
DistTankFitFrz := FreezeLayer("DistributionTankDrainCoupling")
DistTank := stack(DistTankLyr, FlowDistributionTank, DistTankFrz)
Tanks := stack(RoomLyr, Room, HatchLedge, RoomFrz, HatchLedgeCut, DrainWedge, GroupDelete, SubtractDrainWedge, HatchLyr, HatchBox, HatchFrz, Door, StorageTankLyr, FiTank, FiTankWeir, Union_All, StorageTanksFrz, EtScript, DistTank)
# Filter Body
FiPipe_Origin := [
    Tank_Origin[0] - L_Wall + ConRadius(ND_FiInlet) + L_FiPipeToOutletVertCenterLine*cos(AN_FiIn) + S_Fitting/4;
    FlowDistributionTank_Origin[1] + L_FiDistTank - 2*ConRadius(ND_FiInlet) - outerradius(ND_FiPipe) - 1.5*S_Fitting;
    Tank_Origin[2] + H_Wall + T_FiCap + T_Flange + T_TankWall + FiLift
]
FiManBulkhead_Origin := [
    L_FiManBulkheadOffset - innerdiameter(ND_FiPipe, PS_Fi)/2;
    0;
    1.5*ConRadius(ND_FiManTrunk) + T_FiCap
] + FiPipe_Origin
FiManInletPipe_Origin := [L_FiManTrunk; 0 m; 0] + FiManBulkhead_Origin
FiBranch_Origin(i) := [
    FiPipe_Origin[0] + innerdiameter(ND_FiPipe, PS_Fi)/2 - S_FiManBranchEnds - S_FiManBranch*i;
    FiPipe_Origin[1] + innerdiameter(ND_FiManTrunk, PS_FiBranch)/2 - L_BranchExtend;
    FiManInletPipe_Origin[2]
]
LayerFiBody := layer_new("FiBodyPlu", blue3)
DrawFiBody := PipeF(FiPipe_Origin, L_FiPipe, [0; 90]*deg, ND_FiPipe, PS_FiBranch)
FreezeFiBody := FreezeLayer("FiBodyPlu")
FiBodyOrificeInlet := CylinderF(FiManBulkhead_Origin + [zc; 0; 0], outerdiameter(ND_FiManTrunk)/2, CouplingLength(ND_FiManTrunk), [0; 0]*deg)
ArrayInletOrifice := ArrayLast(N_FiLayer/2 + 1, 1, T_FiLayer*2)
FiBodyOrificeOutlet := CylinderF([
    FiPipe_Origin[0] + ConRadius(ND_FiPipe) + CouplingLength(ND_FiManTrunk)/2;
    FiManBulkhead_Origin[1];
    T_FiLayer + FiManBulkhead_Origin[2]
], outerdiameter(ND_FiManTrunk)/2, CouplingLength(ND_FiManTrunk), [0; 0]*deg)
ArrayOutletOrifice := ArrayLast(N_FiLayer/2, 1, T_FiLayer*2)
# GroupDelete
SubtractFiInletsOutlets := SubtractF(["FiBodyPlu"], "DeleteMe")
FiBodyPipe := stack(LayerFiBody, DrawFiBody, FreezeFiBody)
# Internal Filter Piping
# origins in "Filter Body" section
FiManTrunkLyr := layer_new("FiManTrunkPlu", blue3)
FiManTrunk := PipeF(FiManInletPipe_Origin, L_FiManTrunk, [0; 0]*deg, ND_FiManTrunk, PS_FiBranch)
FiManTrunkFrz := FreezeLayer("FiManTrunkPlu")
D_BranchSlotOrifice := 0.96*outerdiameter(ND_FiManBranch) = 0.0204826 m
D_BranchSlotOrifice*10 = 0.204826 m
FiManTrunkOrifice := CylinderF(FiBranch_Origin(0) + [0; 1.5*ConRadius(ND_FiManTrunk); 0], D_BranchSlotOrifice/2, 3*ConRadius(ND_FiManTrunk), [90; 0]*deg)
ArrayTrunkOrifice := ArrayLast(1, N_FiManBranch, -S_FiManBranch)
# GroupDelete
SubtractFiOrifices := SubtractF(["FiManTrunkPlu"], "DeleteMe")
FiManPlu :=
    Local ← layer_new("FiManBranchPlu", blue3)
    for i ∈ 0 .. N_FiManBranch - 1
        Local ← stack(Local, PipeF(FiBranch_Origin(i), L_FiManBranch[i], [270; 0]*deg, ND_FiManBranch, PS_FiBranch))
    Local
FiManFreeze := FreezeLayer("FiMan*Plu")
DrawFiManPipes := stack(FiManTrunkLyr, FiManTrunk, FiManTrunkFrz, FiManTrunkOrifice, ArrayTrunkOrifice, GroupDelete, SubtractFiOrifices, FiManPlu, FiManFreeze)
FiManBranchCaps :=
    Local ← layer_new("FiManCapsPlu", red)
    for i ∈ 0 .. N_FiManBranch - 1
        Local ← stack(Local, CutCapF(FiBranch_Origin(i) + [0; L_FiManBranch[i]; 0], H_FiManCap, [90; 0]*deg, ND_FiManBranch))
    Local
FiManTrunkCap := CapF(FiManInletPipe_Origin, [0; 0]*deg, ND_FiManTrunk)
FiManCapFrz := FreezeLayer("FiManCapsPlu")
ThawFiManPlu := ThawMultiple(["FiManBranchPlu"; "FiManCapsPlu"])
MirrorFiMan := MirrorAll([FiPipe_Origin[0]; FiPipe_Origin[1]], [FiPipe_Origin[0] + zc; FiPipe_Origin[1]], "n")
FiManPluFrz := FreezeMultiple(["FiMan*"])
FiManBulkheadLyr := layer_new("FiManBulkheadPlu", green)
FiManBulkhead := InsertDwg(BulkheadDwg, FiManBulkhead_Origin, ND_FiManTrunk, 180 deg)
FiManBulkheadFrz := FreezeLayer("FiManBulkheadPlu")
GroupFiMan := GroupAll("FiMan")
DrawFiManFittings := stack(FiManBranchCaps, FiManTrunkCap, FiManCapFrz, ThawFiManPlu, MirrorFiMan, FiManPluFrz, FiManBulkheadLyr, FiManBulkhead, FiManBulkheadFrz, ThawMultiple(["FiMan*"]), GroupFiMan, FiManPluFrz)
ArrayFiMan :=
    Local ← stack(ThawMultiple(["FiMan*"]), Rotate_All([FiPipe_Origin[0]; FiPipe_Origin[1]], AN_FiIn), GroupFiMan)
    for i ∈ 0 .. N_FiLayer - 1
        Local ←
            stack(Local, CopyGroup("FiMan", [FiPipe_Origin[0]; FiPipe_Origin[1]; FiManBulkhead_Origin[2]], [[FiPipe_Origin[0]; FiPipe_Origin[1]; FiManBulkhead_Origin[2] + T_FiLayer*(i + 1)]]), Rotate3DLast(FiPipe_Origin, "z", -2*AN_FiIn)) if (-1)^i == 1
            stack(Local, CopyGroup("FiMan", [FiPipe_Origin[0]; FiPipe_Origin[1]; FiManBulkhead_Origin[2]], [[FiPipe_Origin[0]; FiPipe_Origin[1]; FiManBulkhead_Origin[2] + T_FiLayer*(i + 1)]])) otherwise
    Local
FrzFiMan := FreezeMultiple(["FiMan*"])
ArrayFiManifolds := stack(ArrayFiMan, FrzFiMan)
# Bed Tester
ND_FiTesterOuter := 1.5 in
ND_FiTesterInner := 1 in
L_FiTesterReducer := SocketDepth(ND_FiTesterInner)
L_FiTesterBulkheadOffset := 0.5*innerdiameter(ND_FiPipe, PS_Fi) - BulkheadSocketOuterD(ND_FiTesterOuter)*0.5/tan(asin(BulkheadSocketOuterD(ND_FiTesterOuter)/innerdiameter(ND_FiPipe, PS_Fi)))
L_FiTesterInnerCapOffset := innerdiameter(ND_FiPipe, PS_Fi) - ConRadius(ND_FiTesterInner)/tan(asin(ConRadius(ND_FiTesterInner)/innerdiameter(ND_FiPipe, PS_Fi)))
L_FiTesterOuter := 2*SocketDepth(ND_FiTesterOuter)
L_FiTesterInner := innerdiameter(ND_FiPipe, PS_Fi) - L_FiTesterInnerCapOffset - CapThickness(ND_FiTesterInner) + CouplingLength(ND_FiTesterOuter) + L_FiTesterReducer + CapHeight(ND_FiTesterOuter) + SocketDepth(ND_FiTesterOuter) + SocketDepth(ND_FiTesterInner)
# Draw the tester along the x-axis and then rotate it 30 deg.
FiTesterBulkhead_Origin := FiManBulkhead_Origin + [-L_FiManBulkheadOffset + L_FiTesterBulkheadOffset; 0; T_FiLayer/2]
FiTesterFemaleAdapter_Origin := FiTesterBulkhead_Origin + [-BulkheadThreadLength(ND_FiTesterOuter); 0; 0]
FiTesterReducer_Origin := FiTesterFemaleAdapter_Origin + [-CouplingLength(ND_FiTesterOuter); 0; 0]
FiTesterInnerCapL_Origin := FiTesterReducer_Origin + [
    SocketDepth(ND_FiTesterOuter) - L_FiTesterReducer - CapHeight(ND_FiTesterInner) + CapThickness(ND_FiTesterInner) - SocketDepth(ND_FiTesterInner) - SocketDepth(ND_FiTesterOuter);
    0;
    0
]
FiTesterInner_Origin := FiTesterInnerCapL_Origin + [L_FiTesterInner; 0; 0]
FiTesterOuter_Origin := [-CouplingLength(ND_FiTesterOuter) + 2*SocketDepth(ND_FiTesterOuter); 0; 0] + FiTesterFemaleAdapter_Origin
FiTesterLyr := layer_new("FiTesterPlu", blue)
FiTesterOuterPipe := PipeF(FiTesterOuter_Origin, L_FiTesterOuter, [0; 0], ND_FiTesterOuter, PS_Fi)
FiTesterInnerPipe := PipeF(FiTesterInner_Origin, L_FiTesterInner, [0; 0], ND_FiTesterInner, PS_Fi)
FiTesterFrz := FreezeLayer("FiTesterPlu")
FiTesterFitLyr := layer_new("FiTesterFittingsPlu", green)
FiTesterBulkhead := InsertDwg(BulkheadDwg, FiTesterBulkhead_Origin, ND_FiTesterOuter, 180 deg)
FiTesterFemaleAdapter := CouplingF(FiTesterFemaleAdapter_Origin, [0; 0]*deg, ND_FiTesterOuter, PS_Fi)
FiTesterReducer := reducerF(FiTesterReducer_Origin, [0; 0; 0]*deg, ND_FiTesterOuter, ND_FiTesterInner, L_FiTesterReducer, PS_Fi)
FiTesterCapR := CapF(FiTesterInner_Origin, [0; 0]*deg, ND_FiTesterInner)
FiTesterCapL := CapF(FiTesterInnerCapL_Origin, [180; 0]*deg, ND_FiTesterInner)
FiTesterFitFrz := FreezeLayer("FiTesterFittingsPlu")
FiTesterScript := stack(FiTesterLyr, FiTesterOuterPipe, FiTesterInnerPipe, FiTesterFrz, FiTesterFitLyr, FiTesterBulkhead, FiTesterFemaleAdapter, FiTesterReducer, FiTesterCapR, FiTesterCapL, FiTesterFitFrz, ThawMultiple(["*tester*"]), Rotate_All([FiPipe_Origin[0]; FiPipe_Origin[1]], 65 deg), FreezeMultiple(["*tester*"]))
# Filter Caps
ND_FiCapValve := 3 in
FiCapBulkhead_Origin := [0; -ConRadius(ND_FiBwDrain) - ConRadius(ND_FiCapValve); L_FiPipe + T_FiFlange] + FiPipe_Origin
FiCapValve_Origin := FiCapBulkhead_Origin + [0; 0; BulkheadThreadLength(ND_FiCapValve)]
AluminumFlangeLyr := layer_new("AluminumFlange", grey)
TopFlange := CylinderF([0; 0; L_FiPipe] + FiPipe_Origin, outerdiameter(ND_FiPipe)/2 + T_FiFlangeLipOuter, T_FiFlange, [0; 90]*deg)
BottomFlange := CylinderF([0; 0; -T_FiFlange] + FiPipe_Origin, outerdiameter(ND_FiPipe)/2 + T_FiFlangeLipOuter, T_FiFlange, [0; 90]*deg)
AluminumFlangeFrz := FreezeLayer("AluminumFlange")
TopFlangeSubtract := CylinderF([0; 0; L_FiPipe] + FiPipe_Origin, outerdiameter(ND_FiPipe)/2 - T_FiFlangeLipInner, T_FiFlange, [0; 90]*deg)
BottomFlangeSubtract := CylinderF([0; 0; -T_FiFlange] + FiPipe_Origin, outerdiameter(ND_FiPipe)/2 - T_FiFlangeLipInner, T_FiFlange, [0; 90]*deg)
SubtractFlange := SubtractF(["AluminumFlange"], "DeleteMe")
AluminumFlange := stack(AluminumFlangeLyr, TopFlange, BottomFlange, AluminumFlangeFrz, TopFlangeSubtract, BottomFlangeSubtract, GroupDelete, SubtractFlange)
FiCapLyr := layer_new("FiCap", grey)
TopCap := CylinderF([0; 0; L_FiPipe + T_FiFlange] + FiPipe_Origin, outerdiameter(ND_FiPipe)/2 + T_FiFlangeLipOuter, T_FiFlange, [0; 90]*deg)
BottomCap := CylinderF([0; 0; -T_FiFlange - T_FiCap] + FiPipe_Origin, outerdiameter(ND_FiPipe)/2 + T_FiFlangeLipOuter, T_FiFlange, [0; 90]*deg)
FiCapFrz := FreezeLayer("FiCap")
ValveAccessOrifice := CylinderF([FiPipe_Origin[0]; FiCapBulkhead_Origin[1]; L_FiPipe + T_FiFlange + FiPipe_Origin[2]], innerdiameter(ND_FiCapValve, PS_Fi)/2, T_FiFlange, [0; 90]*deg)
SubtractValveAccess := SubtractF(["FiCap"], "DeleteMe")
FiCaps := stack(FiCapLyr, TopCap, BottomCap, FiCapFrz, ValveAccessOrifice, GroupDelete, SubtractValveAccess)
S_BoltsEst := 7 in
R_Bolt := 1/4*in
L_FiBolt := (T_FiCap + T_FiFlange)*1.1
N_Bolts := ceil(2*π*(outerdiameter(ND_FiPipe)*0.5 + R_Bolt)/S_BoltsEst)
N_ThreadedRods := N_Bolts/2
S_Bolts := π*innerdiameter(ND_FiPipe, PS_Fi)/N_Bolts
AN_BoltArray := 360 deg
FiCapBoltLyr := layer_new("FiCapBolt", red)
FiCapBolt := CylinderF([0.5*outerdiameter(ND_FiPipe) + R_Bolt; 0; L_FiPipe - 0.05*(T_FiCap + T_FiFlange)] + FiPipe_Origin, R_Bolt, L_FiBolt, [0; 90]*deg)
ArrayFiBolt := ArrayLastPolar([FiPipe_Origin[0]; FiPipe_Origin[1]], N_Bolts, AN_BoltArray)
FiCapBoltFrz := FreezeLayer("FiCapBolt")
FiBolts := stack(FiCapBoltLyr, FiCapBolt, ArrayFiBolt, view("f"), array_all(2, 1, -(L_FiPipe + 2*T_FiFlange)), view("t"), FiCapBoltFrz)
FiThreadedRodsLyr := layer_new("FiThreadedRods", grey)
FiThreadedRod := CylinderF([0; -(0.5*outerdiameter(ND_FiPipe) + 2*R_Bolt); -1.05*(T_FiCap + T_FiFlange)] + FiPipe_Origin, R_Bolt, L_FiPipe + 2.1*(T_FiCap + T_FiFlange), [0; 90; 0]*deg)
ArrayFiThreadedRod := ArrayLastPolar([FiPipe_Origin[0]; FiPipe_Origin[1]], N_ThreadedRods, AN_BoltArray)
FiThreadedRodFrz := FreezeLayer("FiThreadedRods")
FiThreadedRods := stack(FiThreadedRodsLyr, FiThreadedRod, ArrayFiThreadedRod, FiThreadedRodFrz)
FiCapFittingsLyr := layer_new("FiCapAccess", green)
FiCapBulkhead := InsertDwg(BulkheadDwg, [FiCapBulkhead_Origin[0]; FiCapBulkhead_Origin[2]; (-FiCapBulkhead_Origin)[1]], ND_FiCapValve, 90 deg)
FiCapValve := InsertDwg(BallValveDwg, [FiCapValve_Origin[0]; FiCapValve_Origin[2]; (-FiCapValve_Origin)[1]], ND_FiCapValve, 270 deg)
FiCapFittingsFrz := FreezeLayer("FiCapAccess")
FiCapAccess := stack(FiCapFittingsLyr, view("f"), FiCapBulkhead, FiCapValve, view("t"), FiCapFittingsFrz)
FiCapsScript := stack(AluminumFlange, FiCaps, FiBolts, FiCapAccess)
# Sand Drain
ND_FiSandDrain := 1 in
L_FiSandBulkheadOffset := 0.5*innerdiameter(ND_FiPipe, PS_Fi) - BulkheadSocketOuterD(ND_FiSandDrain)*0.5/tan(asin(BulkheadSocketOuterD(ND_FiSandDrain)/innerdiameter(ND_FiPipe, PS_Fi)))
FiSandDrainPipeInt_Origin := [
    FiPipe_Origin[0];
    -0.5*innerdiameter(ND_FiPipe, PS_Fi) + FiPipe_Origin[1] + BulkheadSocketDepth(ND_FiSandDrain) + SocketDepth(ND_FiSandDrain) + ElbowRadius(ND_FiSandDrain);
    FiManBulkhead_Origin[2] + outerradius(ND_FiManBranch)
]
L_FiSandDrainPipeInt := T_FiLayer - ElbowRadius(ND_FiSandDrain) - 2.1*ConRadius(ND_FiManTrunk)
FiSandDrainElbowInt_Origin := [0; 0; L_FiSandDrainPipeInt] + FiSandDrainPipeInt_Origin
FiSandDrainPipeH_Origin := [0; -ElbowRadius(ND_FiSandDrain); ElbowRadius(ND_FiSandDrain)] + FiSandDrainElbowInt_Origin
L_FiSandDrainPipeH := BulkheadSocketDepth(ND_FiSandDrain) + SocketDepth(ND_FiSandDrain)
FiSandDrainBulkhead_Origin := [0; -L_FiSandDrainPipeH; 0] + FiSandDrainPipeH_Origin
FiSandDrainFemaleAdapter_Origin := FiSandDrainBulkhead_Origin + [0; -BulkheadThreadLength(ND_FiSandDrain); 0]
FiSandDrainElbowExt_Origin := FiSandDrainFemaleAdapter_Origin + [0; -CouplingLength(ND_FiSandDrain); 0]
FiSandDrainValve_Origin := [
    FiSandDrainElbowExt_Origin[0];
    FiSandDrainElbowExt_Origin[1] - ElbowRadius(ND_FiSandDrain);
    -SocketDepth(ND_FiSandDrain) - BallValveSocket(ND_FiSandDrain) + FiSandDrainElbowExt_Origin[2] - ElbowRadius(ND_FiSandDrain)
]
FiSandDrainPipeVExt_Origin := FiSandDrainValve_Origin + [0; 0; -BallValveLength(ND_FiSandDrain) + 2*BallValveSocket(ND_FiSandDrain)]
L_SandSettle := 10 cm
FiSandDrainPluLyr := layer_new("FiSandDrainPlu", blue)
FiSandDrainIntV := PipeF(FiSandDrainPipeInt_Origin, L_FiSandDrainPipeInt, [0; 90; 0]*deg, ND_FiSandDrain, PS_Fi)
FiSandDrainPipeH := PipeF(FiSandDrainPipeH_Origin, L_FiSandDrainPipeH, [90; 0]*deg, ND_FiSandDrain, PS_Fi)
FiSandDrainPipeExt := PipeF(FiSandDrainPipeVExt_Origin, L_SandSettle + BallValveSocket(ND_FiSandDrain), [0; 270; 0]*deg, ND_FiSandDrain, PS_Fi)
FiSandDrainPluFrz := FreezeLayer("FiSandDrainPlu")
FiSandDrainPlu := stack(FiSandDrainPluLyr, FiSandDrainIntV, FiSandDrainPipeH, FiSandDrainPipeExt, FiSandDrainPluFrz)
FiSandDrainFitLyr := layer_new("FiSandDrainFittings", green)
FiSandDrainBulkhead := InsertDwg(BulkheadDwg, FiSandDrainBulkhead_Origin, ND_FiSandDrain, 270 deg)
FiSandDrainFemaleAdapter := CouplingF(FiSandDrainFemaleAdapter_Origin, [90; 0]*deg, ND_FiSandDrain, PS_Fi)
FiSandDrainElbowInt := ElbowF(FiSandDrainElbowInt_Origin, [90; 90; 0]*deg, ND_FiSandDrain, PS_Fi)
FiSandDrainElbowExt := ElbowF(FiSandDrainElbowExt_Origin, [180; 90; 0]*deg, ND_FiSandDrain, PS_Fi)
FiSandDrainValve := InsertDwg(BallValveDwg, [FiSandDrainValve_Origin[0]; FiSandDrainValve_Origin[2]; -FiSandDrainValve_Origin[1]], ND_FiSandDrain, 90 deg)
FiSandDrainFitFrz := FreezeLayer("FiSandDrainFittings")
FiSandDrainFit := stack(FiSandDrainFitLyr, view("f"), FiSandDrainValve, view("t"), FiSandDrainBulkhead, FiSandDrainFemaleAdapter, FiSandDrainElbowInt, FiSandDrainElbowExt, FiSandDrainFitFrz)
FiSandDrainScript := stack(FiSandDrainPlu, FiSandDrainFit)
# Backwash Piping
ND_FiAirValve := 1 in
L_FiBwExtend := L_FiBwVertCenterLine - ShortTeeLength(ND_FiBwDrain) - innerdiameter(ND_FiPipe, PS_Fi)/2 + L_FiBwBulkheadOffset - BulkheadThreadLength(ND_FiBwDrain) + 2*SocketDepth(ND_FiBwDrain) - CouplingLength(ND_FiBwDrain)
FiBwBulkhead_Origin := [
    innerdiameter(ND_FiPipe, PS_Fi)/2 - L_FiBwBulkheadOffset;
    0;
    L_FiPipe - T_Flange - 1.25*ConRadius(ND_FiBwDrain)
] + FiPipe_Origin
FiBwFemaleAdapter_Origin := FiBwBulkhead_Origin + [BulkheadThreadLength(ND_FiBwDrain); 0; 0]
FiBwTee_Origin := FiBwFemaleAdapter_Origin + [2*SocketDepth(ND_FiBwDrain) + L_FiBwExtend - CouplingLength(ND_FiBwDrain); 0; 0]
L_FiBwPipeVert := L_FiPipe - 1.25*ConRadius(ND_FiBwDrain) + ShortTeeLength(ND_FiDrainValve) + 2*SocketDepth(ND_FiDrainValve)
FiBwReducer_Origin := FiBwTee_Origin + [ShortTeeLength(ND_FiBwDrain); 0; ShortTeeLength(ND_FiBwDrain) + 2*SocketDepth(ND_FiBwDrain)]
FiBwAirValve_Origin := FiBwReducer_Origin + [0; 0; SocketDepth(ND_FiBwDrain) + SocketDepth(ND_FiAirValve)]
FiBwVertValve_Origin := FiBwTee_Origin + [ShortTeeLength(ND_FiBwDrain); 0; -L_FiBwPipeVert - ShortTeeLength(ND_FiBwDrain)]
FiBwDrainLyr := layer_new("FiBwDrainPlu", blue3)
FiBwMan := PipeF(FiBwBulkhead_Origin, L_FiBwMan, [0; 0]*deg, ND_FiBwDrain, PS_Fi)
FiBwDrainFrz := FreezeLayer("FiBwDrainPlu")
FiBwManOrifice := CylinderF(FiBwBulkhead_Origin - [L_FiBwOrificeOffsetR; 0; 0], D_FiBwOrifices/2, 1.1*ConRadius(ND_FiBwDrain), [0; 270]*deg)
ArrayFiBwManOrifices := ArrayLast(1, N_FiBwOrifices, -B_FiBwOrifices)
GroupDelete
D_FiBwOrifices =  # error: This variable is undefined.
SubtractFiBwManOrifices := SubtractF(["FiBwDrainPlu"], "DeleteMe")
B_FiBwOrifices =  # error
ND_FiAirValve = 1 in
SelectBwDrain := SelectLayer("FiBwDrainPlu")
FiBwNipple := PipeF(FiBwTee_Origin, 2*SocketDepth(ND_FiBwDrain) + L_FiBwExtend, [0; 0]*deg, ND_FiBwDrain, PS_Fi)
FiBwPipeVert1 := PipeF(FiBwTee_Origin + [ShortTeeLength(ND_FiBwDrain); 0; -ShortTeeLength(ND_FiBwDrain)], L_FiBwPipeVert, [0; 270]*deg, ND_FiBwDrain, PS_Fi)
FiBwDrainPlu := stack(FiBwDrainLyr, FiBwMan, FiBwDrainFrz, FiBwManOrifice, ArrayFiBwManOrifices, GroupDelete, SubtractFiBwManOrifices, SelectBwDrain, FiBwNipple, FiBwPipeVert1, FiBwDrainFrz)
FiBwDrainFittingsLyr := layer_new("FiBwDrainFittingsPlu", green)
FiBwManBulkhead := InsertDwg(BulkheadDwg, FiBwBulkhead_Origin, ND_FiBwDrain, 0 deg)
FiBwFemaleAdapter := CouplingF(FiBwFemaleAdapter_Origin, [0; 0; 90]*deg, ND_FiBwDrain, PS_Fi)
FiBwTee := TeeF(FiBwTee_Origin, [90; 0; 90]*deg, ND_FiBwDrain, PS_Fi)
FiOutletReducer := reducerF(FiBwReducer_Origin, [0; 90; 0]*deg, ND_FiBwDrain, ND_FiAirValve, SocketDepth(ND_FiManTrunk), PS_Fi)
FiBwAirValve := InsertDwg(BallValveDwg, [FiBwAirValve_Origin[1]; FiBwAirValve_Origin[2]; FiBwAirValve_Origin[0]], ND_FiAirValve, 270 deg)
FiBwVertValve := InsertDwg(BallValveDwg, [FiBwVertValve_Origin[1]; FiBwVertValve_Origin[2]; FiBwVertValve_Origin[0]], ND_FiBwDrain, 90 deg)
FiBwManCap := CapF(FiBwBulkhead_Origin - [L_FiBwMan; 0; 0], [180; 0]*deg, ND_FiBwDrain)
SubtractFiBwManCapOrifices := SubtractF(["FiBwDrainFittingsPlu"], "DeleteMe")
SelectFiBwDrainFittings := SelectLayer("FiBwDrainFittingsPlu")
FiBwDrainFittingsFrz := FreezeLayer("FiBwDrainFittingsPlu")
FiBwDrainFittings := stack(FiBwDrainFittingsLyr, FiOutletReducer, FiBwManCap, FiBwDrainFittingsFrz, FiBwManOrifice, ArrayFiBwManOrifices, GroupDelete, SubtractFiBwManCapOrifices, SelectFiBwDrainFittings, FiBwManBulkhead, FiBwFemaleAdapter, FiBwTee, view("r"), FiBwAirValve, FiBwVertValve, view("t"), FiBwDrainFittingsFrz)
Y_FiBwDrainPipeOffset := (FiBwTee_Origin[0] + ShortTeeLength(ND_RMPipe) - FiPipe_Origin[0])*1/sqrt(3)
X_FiBwDrainPipeOffset := (FiBwTee_Origin[0] + ShortTeeLength(ND_RMPipe) - FiPipe_Origin[0])*(1 - sqrt(3)/2)  # these only work for 30 deg angles!!!!
FiBwPlu := stack(FiBwDrainFittings, FiBwDrainPlu, ThawMultiple(["*bw*"]), Rotate_All([FiPipe_Origin[0]; FiPipe_Origin[1]], AN_Bw), FreezeMultiple(["*bw*"]))
# Inlet Plumbing
AN_FiDrain := 70 deg + 270 deg
FiInletBallValveBottom_Origin := [
    FiManBulkhead_Origin[0] - BulkheadThreadLength(ND_FiInlet) + BallValveSocket(ND_FiInlet) - L_FiManBulkheadOffset;
    FiManBulkhead_Origin[1];
    FiManBulkhead_Origin[2]
]
FullReducerLength := 2*SocketDepth(ND_FiManTrunk) + SocketDepth(ND_FiInlet)  # right now the reducer uses length as an input
FiInletReducerBottom_Origin := [
    BallValveSocket(ND_FiManTrunk) - BallValveLength(ND_FiManTrunk) - FullReducerLength + SocketDepth(ND_FiInlet);
    0;
    0
] + FiInletBallValveBottom_Origin
FiInletTeeBottom_Origin := [-2*SocketDepth(ND_FiInlet) - ElbowRadius(ND_FiInlet) + ShortTeeLength(ND_FiInlet); 0; 0] + FiInletReducerBottom_Origin
FiInletElbowUpper_Origin := FiInletTeeBottom_Origin + [-ShortTeeLength(ND_FiInlet); 0; 6*T_FiLayer - ElbowRadius(ND_FiInlet)]
FiInletElbowDrop_Origin := FiInletTeeBottom_Origin + [-ShortTeeLength(ND_FiInlet); 0; -ShortTeeLength(ND_FiInlet) - 2*SocketDepth(ND_FiInlet)]
FiInletElbowUp_Origin := FiInletElbowDrop_Origin + [-(ElbowRadius(ND_FiInlet) + 2*SocketDepth(ND_FiInlet)); 0; -ElbowRadius(ND_FiInlet)]
FiDrainTee_Origin := FiInletElbowUp_Origin + [
    -ElbowRadius(ND_FiInlet) + ShortTeeLength(ND_FiInlet)*cos(AN_FiDrain);
    ShortTeeLength(ND_FiInlet)*sin(AN_FiDrain);
    2*SocketDepth(ND_FiInlet) + ElbowRadius(ND_FiInlet) + ShortTeeLength(ND_FiInlet)
]
FiDrainReducer_Origin := FiDrainTee_Origin + [2*SocketDepth(ND_FiInlet)*cos(AN_FiDrain); 2*SocketDepth(ND_FiInlet)*sin(AN_FiDrain); 0]
FiDrainValve_Origin := FiDrainReducer_Origin + [
    (2*SocketDepth(ND_FiDrainValve) + BallValveLength(ND_FiDrainValve) - BallValveSocket(ND_FiDrainValve))*cos(AN_FiDrain);
    (2*SocketDepth(ND_FiDrainValve) + BallValveLength(ND_FiDrainValve) - BallValveSocket(ND_FiDrainValve))*sin(AN_FiDrain);
    0
]
FiDrainElbow_Origin := FiDrainValve_Origin + [
    (BallValveSocket(ND_FiDrainValve) + SocketDepth(ND_FiDrainValve) + ElbowRadius(ND_FiDrainValve))*cos(AN_FiDrain);
    (BallValveSocket(ND_FiDrainValve) + SocketDepth(ND_FiDrainValve) + ElbowRadius(ND_FiDrainValve))*sin(AN_FiDrain);
    -ElbowRadius(ND_FiDrainValve)
]
FiInletManifoldFittingsLyr := layer_new("FiInletManFittingsPlu", green)
FiInletReducer := reducerF(FiInletReducerBottom_Origin, [180; 0; 0]*deg, ND_FiInlet, ND_FiManTrunk, SocketDepth(ND_FiManTrunk), PS_Fi)
FiInletBallValve := InsertDwg(BallValveDwg, FiInletBallValveBottom_Origin, ND_FiManTrunk, 0 deg)
FiInletBottomTee := TeeF(FiInletTeeBottom_Origin, [270; 0; 90]*deg, ND_FiInlet, PS_Fi)
ArrayFiInFittings := array_all(4, 1, 2*T_FiLayer)
ArrayFiInTees := ArrayLast(3, 1, 2*T_FiLayer)
FiOutElbowDrop := ElbowF(FiInletElbowDrop_Origin, [0; 0; 270]*deg, ND_FiInlet, PS_Fi)
FiInletElbowUp := ElbowF(FiInletElbowUp_Origin, [90; 0; 270]*deg, ND_FiInlet, PS_Fi)
FiInletElbowUpper := ElbowF(FiInletElbowUpper_Origin, [180; 0; 270]*deg, ND_FiInlet, PS_Fi)
FiDrainTee := stack(view("f"), TeeF([FiDrainTee_Origin[0]; FiDrainTee_Origin[2]; -FiDrainTee_Origin[1]], [270 deg; AN_FiDrain; 0], ND_FiInlet, PS_Fi), view("t"))
FiDrainReducer := reducerF(FiDrainReducer_Origin, [180 deg + AN_FiDrain; 0; 0], ND_FiInlet, ND_FiDrainValve, SocketDepth(ND_FiDrainValve), PS_Fi)
FiDrainValve := InsertDwg(BallValveDwg, FiDrainValve_Origin, ND_FiDrainValve, AN_FiDrain)
FiDrainElbow := stack(view("f"), ElbowF([FiDrainElbow_Origin[0]; FiDrainElbow_Origin[2]; -FiDrainElbow_Origin[1]], [0; AN_FiDrain; 0], ND_FiDrainValve, PS_Fi), view("t"))
FiInletManifoldFittingsFrz := FreezeLayer("FiInletManFittingsPlu")
FiInletFittings := stack(FiInletManifoldFittingsLyr, FiInletReducer, FiInletBallValve, view("f"), ArrayFiInFittings, view("t"), FiInletBottomTee, view("f"), ArrayFiInTees, view("t"), FiInletElbowUpper, FiOutElbowDrop, FiInletElbowUp, FiDrainTee, FiDrainValve, FiDrainReducer, FiDrainElbow, FiInletManifoldFittingsFrz)
FiInletPipesLyr := layer_new("FiInletManPlu", blue)
FiInletPipesFrz := FreezeLayer("FiInletManPlu")
L_FiDistPipesUnder := FlowDistributionTank_Origin[2] - CouplingLength(ND_FiInlet) + SocketDepth(ND_FiInlet) - ShortTeeLength(ND_FiInlet) - FiDrainTee_Origin[2]
FiDistUnderInletNorth := PipeF([
    FiInletElbowUp_Origin[0] - ElbowRadius(ND_FiInlet);
    FiInletElbowUp_Origin[1];
    FiDrainTee_Origin[2] + ShortTeeLength(ND_FiInlet)
], L_FiDistPipesUnder, [0; 90]*deg, ND_FiInlet, PS_Fi)
L_BottomPipeV := 2*T_FiLayer - TeeLength(ND_FiInlet)
FiInletManBottomPipeV := PipeF(FiInletTeeBottom_Origin + [-ShortTeeLength(ND_FiInlet); 0; ShortTeeLength(ND_FiInlet)], L_BottomPipeV, [0; 90]*deg, ND_FiInlet, PS_Fi)
# LH = left horiz
FiInletManUpperPipeV := PipeF(FiInletElbowUpper_Origin, L_BottomPipeV + ShortTeeLength(ND_FiInlet) - ElbowRadius(ND_FiInlet), [0; 270]*deg, ND_FiInlet, PS_Fi)
L_InletPipeBottomLH := 2*SocketDepth(ND_FiInlet)
FiInletPipeBottomLH := PipeF(FiInletReducerBottom_Origin, L_InletPipeBottomLH, [0; 0]*deg, ND_FiInlet, PS_Fi)
ArrayFiInletPipeV := ArrayLast(2, 1, 2*T_FiLayer)
ArrayFiInletPipesH := array_all(4, 1, 2*T_FiLayer)
FiInletPipes := stack(FiInletPipesLyr, FiInletPipeBottomLH, view("f"), ArrayFiInletPipesH, view("t"), FiInletManBottomPipeV, view("f"), ArrayFiInletPipeV, view("t"), FiDistUnderInletNorth, FiInletManUpperPipeV, FiInletPipesFrz, ThawMultiple(["FiInletMan*"]), Rotate_All([FiPipe_Origin[0]; FiPipe_Origin[1]], AN_FiIn), FreezeMultiple(["FiInletMan*"]))
FiInletPlu := stack(FiInletFittings, FiInletPipes)
L_InletShortPiece := max(0, CouplingLength(ND_FiInlet) - T_Et) + 2*SocketDepth(ND_FiInlet)
# Outlet Plumbing
ND_FiSamplerValve := 1 in
FiCheckValve_Origin := [
    (BulkheadThreadLength(ND_FiManTrunk) + ChkValveLength(ND_FiManTrunk) - 2*ChkValveSocket(ND_FiManTrunk)) + 2*FiPipe_Origin[0] - FiManBulkhead_Origin[0];
    FiManBulkhead_Origin[1];
    FiManBulkhead_Origin[2] + T_FiLayer
]
FiOutletAdapter_Origin := FiCheckValve_Origin + [MaleAdapterLength(ND_FiManTrunk) - SocketDepth(ND_FiManTrunk); 0; 0]
FiOutletManElbow_Origin := [
    FiPipe_Origin[0] + L_FiPipeToOutletVertCenterLine - ElbowRadius(ND_FiInlet);
    FiOutletAdapter_Origin[1];
    FiOutletAdapter_Origin[2]
]
FiOutletReducer_Origin := FiOutletManElbow_Origin + [-(2*SocketDepth(ND_FiInlet)); 0; 0]
FiOutletManTeeBottom_Origin := [-ShortTeeLength(ND_FiInlet) + ElbowRadius(ND_FiInlet); 0; 2*T_FiLayer] + FiOutletManElbow_Origin
L_FiSamplerReducer := SocketDepth(ND_FiInlet) + 2*SocketDepth(ND_FiSamplerValve)
FiOutletSamplerReducer_Origin := FiOutletManTeeBottom_Origin + [ShortTeeLength(ND_FiInlet); 0; -(ShortTeeLength(ND_FiInlet) + 2*SocketDepth(ND_FiInlet))]
FiOutletSamplerValve_Origin := FiOutletSamplerReducer_Origin + [
    0;
    0;
    -2*SocketDepth(ND_FiSamplerValve) - BallValveLength(ND_FiSamplerValve) + BallValveSocket(ND_FiSamplerValve)
]
FiDischargeElbow1_Origin := [
    ShortTeeLength(ND_FiInlet) + FiOutletManTeeBottom_Origin[0];
    FiOutletManTeeBottom_Origin[1];
    FiOutletManTeeBottom_Origin[2] + 2*SocketDepth(ND_FiInlet) + 2*T_FiLayer + ShortTeeLength(ND_FiInlet)
]
FiDischargeElbow2_Origin := [0; ElbowRadius(ND_FiInlet) + T_TankWall + ConRadius(ND_FiPipe); ElbowRadius(ND_FiInlet)] + FiDischargeElbow1_Origin
FiOutletFittingsLyr := layer_new("FiOutletManFittingsPlu", green)
FiOutletCheckValves := InsertDwg(ChkValveDwg, FiCheckValve_Origin, ND_FiManTrunk, 0 deg)
ArrayFiOutletCheckValves := array_all(3, 1, 2*T_FiLayer)
FiOutletAdapter := MaleAdapterF(FiOutletAdapter_Origin, [0; 0]*deg, ND_FiManTrunk, PS_Fi)
FiOutletReducer := reducerF(FiOutletReducer_Origin, [0; 0; 0]*deg, ND_FiInlet, ND_FiManTrunk, SocketDepth(ND_FiManTrunk), PS_Fi)
FiOutletManElbow := ElbowF(FiOutletManElbow_Origin, [270; 0; 90]*deg, ND_FiInlet, PS_Fi)
FiOutletManTeeBottom := TeeF(FiOutletManTeeBottom_Origin, [90; 0; 90]*deg, ND_FiInlet, PS_Fi)
ArrayFiOutletTee := ArrayLast(2, 1, 2*T_FiLayer)
FiPipe_Origin =  # error
FiOutletFittingsFrz := FreezeLayer("FiOutletManFittingsPlu")
FiOutletFittings := stack(FiOutletFittingsLyr, FiOutletReducer, FiOutletCheckValves, FiOutletAdapter, view("f"), ArrayFiOutletCheckValves, view("t"), FiOutletManTeeBottom, view("f"), ArrayFiOutletTee, view("t"), FiOutletManElbow, FiOutletFittingsFrz)
FiOutletPipesLyr := layer_new("FiOutletManPlu", blue)
L_FiOutExtend := FiOutletReducer_Origin[0] - FiOutletAdapter_Origin[0] - SocketDepth(ND_FiInlet)
FiOutletNipple := PipeF([FiOutletAdapter_Origin[0] + L_FiOutExtend; FiOutletAdapter_Origin[1]; FiOutletAdapter_Origin[2]], L_FiOutExtend, [0; 0]*deg, ND_FiManTrunk, PS_Fi)
FiBottomHOutlManPipe := PipeF([
    FiOutletReducer_Origin[0] + 2*SocketDepth(ND_FiInlet);
    FiOutletAdapter_Origin[1];
    FiOutletAdapter_Origin[2]
], 2*SocketDepth(ND_FiInlet), [0; 0]*deg, ND_FiInlet, PS_Fi)
FiMidHOutManPipe := PipeF([
    FiOutletReducer_Origin[0] + (2*SocketDepth(ND_FiInlet) + ElbowRadius(ND_FiInlet) - ShortTeeLength(ND_FiInlet));
    FiOutletAdapter_Origin[1];
    FiOutletAdapter_Origin[2] + 2*T_FiLayer
], 2*SocketDepth(ND_FiInlet) + ElbowRadius(ND_FiInlet) - ShortTeeLength(ND_FiInlet), [0; 0]*deg, ND_FiInlet, PS_Fi)
FiUpperHOutManPipe := PipeF([
    FiOutletReducer_Origin[0] + (2*SocketDepth(ND_FiInlet) + ElbowRadius(ND_FiInlet) - ShortTeeLength(ND_FiInlet));
    FiOutletAdapter_Origin[1];
    FiOutletAdapter_Origin[2] + 4*T_FiLayer
], 2*SocketDepth(ND_FiInlet) + ElbowRadius(ND_FiInlet) - ShortTeeLength(ND_FiInlet), [0; 0]*deg, ND_FiInlet, PS_Fi)
FiMidVOutManPipe := PipeF(FiOutletManTeeBottom_Origin + [ShortTeeLength(ND_FiInlet); 0; ShortTeeLength(ND_FiInlet)], 2*T_FiLayer - TeeLength(ND_FiInlet), [0; 90]*deg, ND_FiInlet, PS_Fi)
FiLowerVOutManPipe := PipeF(FiOutletManElbow_Origin + [ElbowRadius(ND_FiInlet); 0; ElbowRadius(ND_FiInlet)], 2*T_FiLayer - ShortTeeLength(ND_FiInlet) - ElbowRadius(ND_FiInlet), [0; 90]*deg, ND_FiInlet, PS_Fi)
FiOutletPipesFrz := FreezeLayer("FiOutletManPlu")
FiOutletPipes := stack(FiOutletPipesLyr, FiOutletNipple, view("f"), ArrayFiOutletCheckValves, view("t"), FiMidVOutManPipe, FiLowerVOutManPipe, FiBottomHOutlManPipe, FiMidHOutManPipe, FiUpperHOutManPipe, FiOutletPipesFrz, ThawMultiple(["FiOutletMan*"]), Rotate_All([FiPipe_Origin[0]; FiPipe_Origin[1]], AN_FiOut), FreezeMultiple(["FiOutletMan*"]))
FiOutletPlu := stack(FiOutletFittings, FiOutletPipes)
FiInExManPlu := stack(FiInletPlu, FiOutletPlu)
# Array Filter
ThawFi := ThawMultiple(["Fi*"])
FiPipe3_Origin := [
    FiPipe_Origin[0];
    Tank_Origin[1] + ConRadius(ND_FiInlet) + 2*ConRadius(ND_RMPipe) + sin(AN_FiIn)*L_FiPipeToOutletVertCenterLine;
    FiPipe_Origin[2]
]
L_ChannelAvail := FiPipe_Origin[1] - FiPipe3_Origin[1]
B_Fi := (L_ChannelAvail - (CouplingLength(ND_FiSandDrain) + ElbowRadius(ND_FiSandDrain) + ConRadius(ND_FiSandDrain)))/(N_Fi - 1)
ArrayFi := array_all(N_Fi - 1, 1, -B_Fi)
MirrorFi := MirrorGroup([Tank_Origin[0]; FiPipe_Origin[1] - L_ChannelAvail/2], [Tank_Origin[0] - zc; FiPipe_Origin[1] - L_ChannelAvail/2], "Fi*", "n")
FreezeFi := FreezeMultiple(["Fi*"])
FiArray := stack(ThawFi, ArrayFi, MirrorFi, FreezeFi)
FiPipe2_Origin := [0; -B_Fi; 0] + FiPipe_Origin
# Operator Access/Walls
# Chem doser platform
H_ConstantHeadAboveEt := 10 cm
H_ConstantHeadToStockOutlet := 15 cm
H_ChemPlatformLedge := 5 cm = 0.05 m
H_ConstantHeadToStockBottom := H_ConstantHeadToStockOutlet - 10 cm
Z_ChemPlatformTop := FlowMeteringTank_Origin[2] + H_Et + H_ConstantHeadAboveEt + H_ConstantHeadToStockBottom
ChemPlatform_Origin := [Tank_Origin[0]; Tank_Origin[1] + W_Wall - L_ChemPlatform; Z_ChemPlatformTop]
H_ChemPlatform := Z_ChemPlatformTop - Tank_Origin[0] - H_Wall - T_TankWall
H_StairSet := H_ChemPlatform/3
W_StairSet := H_StairSet*3/2
# Stairs and associated platforms
W_SingleStairMin := 27 cm
H_SingleStairEst := 27 cm
W_StairPlatformMin := 40 cm
H_StairsTotal := H_ChemPlatform - 2*H_SingleStairEst
L_EtStairsAvail := W_Wall - W_Et - T_Et - W_StairPlatformMin - 15 cm
L_ChemPlatformStairsAvail := W_Wall - L_ChemPlatform - W_Et - T_Et
L_StairsAvailTotal := L_EtStairsAvail + L_ChemPlatformStairsAvail
Stair_Ratio := H_StairsTotal/L_StairsAvailTotal
N_Stairs := floor(L_StairsAvailTotal/W_SingleStairMin)
W_SingleStair := L_StairsAvailTotal/N_Stairs
H_SingleStair := W_SingleStair*Stair_Ratio
H_ChemPlatformStairsTotal := Z_ChemPlatformTop - T_TankWall - H_Wall - T_Platform
H_ChemPlatformStairs := (H_ChemPlatformStairsTotal - 2*H_SingleStair)/3
OpAccessLyr := layer_new("OperatorAccess", grey)
ChemPlatform := BoxF(ChemPlatform_Origin + [0; 0; H_ChemPlatformLedge], [-W_ChemPlatform; L_ChemPlatform; -T_Platform] + ChemPlatform_Origin, [0; 0; 0]*deg)
CHTPillar := BoxF([-W_ChemPlatform; 0; 0] + ChemPlatform_Origin, [
    -W_ChemPlatform + T_Et + ChemPlatform_Origin[0];
    ChemPlatform_Origin[1] + T_Et;
    Tank_Origin[2] + H_Wall
], [0; 0; 0]*deg)
N_StairsToEt := round(L_EtStairsAvail*H_SingleStair/W_SingleStair/H_SingleStair)
H_StairToEt := L_EtStairsAvail*H_SingleStair/W_SingleStair/N_StairsToEt
H_EtStairsTot := H_StairToEt*N_StairsToEt
N_StairsToChemPlatform := floor((L_ChemPlatformStairsAvail - W_StairPlatformMin + W_SingleStair + 15 cm)/W_SingleStair)
L_StairsToChemPlatformTot := N_StairsToChemPlatform*W_SingleStair
L_ChemPlatformStairsAvail =  # error
W_PlatformUpper := L_ChemPlatformStairsAvail - L_StairsToChemPlatformTot + 15 cm
H_StairsToChemPlatformTot := L_StairsToChemPlatformTot*H_SingleStair/W_SingleStair
H_ChemPlatformStair := H_StairsToChemPlatformTot/N_StairsToChemPlatform
H_StairToChemTanksAvail := H_ChemPlatform - H_EtStairsTot - H_StairToEt
H_StairExtra := (H_StairToChemTanksAvail - H_StairsToChemPlatformTot + H_ChemPlatformStair + H_SingleStair)/3
W_StairPlatformMin = 0.4 m
H_StairToEt =  # error
EtStairsBox := BoxF([Tank_Origin[0]; W_Wall + Tank_Origin[1]; H_Wall + T_TankWall + Tank_Origin[2]], [
    -W_ChemPlatform/2;
    -(L_EtStairsAvail + 15 cm) + W_Wall;
    Tank_Origin[2] + T_TankWall + H_Wall + H_StairExtra
] + Tank_Origin, [0; 0; 0]*deg)
H_StairExtra =  # error
Tank_Origin[2] + T_TankWall + H_Wall + H_StairExtra - 2*H_SingleStair
H_StairExtra - 2*H_SingleStair =  # error
EtStairs := Stairs([
    FlowMeteringTank_Origin[0] - W_ChemPlatform/2;
    W_Et + T_Et + W_StairPlatformMin + FlowMeteringTank_Origin[1];
    H_EtStairsTot + Tank_Origin[2] + T_TankWall + H_Wall + H_StairExtra - H_StairToEt
], W_ChemPlatform/2, H_EtStairsTot, 90 deg)
EtPlatform := BoxF([
    FlowMeteringTank_Origin[0];
    W_Et + T_Et + FlowMeteringTank_Origin[1];
    Tank_Origin[2] + H_Wall + T_TankWall
], [
    FlowMeteringTank_Origin[0] - W_ChemPlatform;
    W_Et + T_Et + FlowMeteringTank_Origin[1] + W_StairPlatformMin;
    Tank_Origin[2] + H_Wall + T_TankWall + H_EtStairsTot + 2*H_StairExtra - H_StairToEt
] + Tank_Origin, [0; 0; 0]*deg)
EtPlatformLeft := BoxF([
    FlowMeteringTank_Origin[0] - W_ChemPlatform/2;
    W_Et + T_Et + FlowMeteringTank_Origin[1];
    Tank_Origin[2] + H_Wall + T_TankWall + H_EtStairsTot
], [
    FlowMeteringTank_Origin[0] - W_ChemPlatform;
    ChemPlatform_Origin[1];
    Tank_Origin[2] + H_Wall + T_TankWall + H_EtStairsTot + 3*H_StairExtra - H_StairToEt
] + Tank_Origin, [0; 0; 0]*deg)
UpperPlatform := BoxF([
    FlowMeteringTank_Origin[0] - W_ChemPlatform/2;
    ChemPlatform_Origin[1] - 11.67 cm;
    Z_ChemPlatformTop + H_ChemPlatformLedge
], [
    FlowMeteringTank_Origin[0] - W_ChemPlatform;
    ChemPlatform_Origin[1];
    Z_ChemPlatformTop - H_StairExtra - H_StairsToChemPlatformTot
] + Tank_Origin, [0; 0; 0]*deg)
UpperPlatformExtra := BoxF([
    FlowMeteringTank_Origin[0] - W_ChemPlatform/2;
    ChemPlatform_Origin[1] + 17.33 cm;
    Z_ChemPlatformTop + H_ChemPlatformLedge
], [FlowMeteringTank_Origin[0] - W_ChemPlatform; ChemPlatform_Origin[1]; Z_ChemPlatformTop] + Tank_Origin, [0; 0; 0]*deg)
WestPlatform := BoxF([
    FlowMeteringTank_Origin[0] - L_Et - T_Et;
    FlowMeteringTank_Origin[1] + W_Et;
    Tank_Origin[2] + H_Wall + T_TankWall + H_EtStairsTot + 3*H_StairExtra - H_StairToEt
], [
    FlowMeteringTank_Origin[0] - W_ChemPlatform;
    W_Et + T_Et + FlowMeteringTank_Origin[1];
    Tank_Origin[2] + H_Wall + T_TankWall
] + Tank_Origin, [0; 0; 0]*deg)
ChemPlatformStairs := Stairs([
    FlowMeteringTank_Origin[0] - W_ChemPlatform/2;
    W_Et + T_Et + FlowMeteringTank_Origin[1] + W_StairPlatformMin - W_SingleStair + L_StairsToChemPlatformTot;
    H_EtStairsTot + Tank_Origin[2] + T_TankWall + H_Wall + 3*H_StairExtra - H_StairToEt + H_StairsToChemPlatformTot - H_ChemPlatformStair
], W_ChemPlatform/2, H_StairsToChemPlatformTot, -90 deg)
OpAccessFrz := FreezeLayer("OperatorAccess")
ChemPlatformLedgeBox := BoxF(ChemPlatform_Origin + [0; 5 cm; H_ChemPlatformLedge], [-W_ChemPlatform + 5 cm; L_ChemPlatform; 0] + ChemPlatform_Origin, [0; 0; 0]*deg)
SubtractChemPlatformLedge := SubtractF(["OperatorAccess"], "DeleteMe")
OpAccessSelect := SelectLayer("OperatorAccess")
OpAccessScript := stack(OpAccessLyr, ChemPlatform, CHTPillar, EtStairs, EtStairsBox, EtPlatform, EtPlatformLeft, ChemPlatformStairs, UpperPlatform, WestPlatform, Union_All, OpAccessFrz, ChemPlatformLedgeBox, GroupDelete, SubtractChemPlatformLedge, OpAccessSelect, UpperPlatformExtra, OpAccessFrz)
# Backwash Buckets, Drain Channel
R_FitHand := 5 cm
BwBucketsLyr := layer_new("BwBuckets", yellow)
NorthBwBucketOuter := CylinderF([
    -cos(AN_BwMod)*L_FiBwVertCenterLine + FiPipe_Origin[0] - R_FitHand;
    -sin(AN_BwMod)*L_FiBwVertCenterLine + FiPipe_Origin[1];
    Tank_Origin[2] + H_Wall + T_TankWall
], 1.8*ConRadius(ND_FiBwDrain) + R_FitHand, H_BackwashBoxes, [0; 90; 0]*deg)
MirrorBwBucket := MirrorLast([Tank_Origin[0]; FiPipe_Origin[1] - L_ChannelAvail/2], [Tank_Origin[0] - zc; FiPipe_Origin[1] - L_ChannelAvail/2], "n")
MidBwBucketOuter := CylinderF([
    -cos(AN_BwMod)*L_FiBwVertCenterLine + FiPipe_Origin[0] - R_FitHand;
    -sin(AN_BwMod)*L_FiBwVertCenterLine + FiPipe_Origin[1] - B_Fi;
    Tank_Origin[2] + H_Wall + T_TankWall
], 1.8*ConRadius(ND_FiBwDrain) + R_FitHand, H_BackwashBoxes, [0; 90; 0]*deg)
FreezeBwBuckets := FreezeLayer("BwBuckets")
NorthBwBucketInner := CylinderF([
    -cos(AN_BwMod)*L_FiBwVertCenterLine + FiPipe_Origin[0] - R_FitHand;
    -sin(AN_BwMod)*L_FiBwVertCenterLine + FiPipe_Origin[1];
    Tank_Origin[2] + H_Wall + T_TankWall + .08*ConRadius(ND_FiBwDrain)
], 1.72*ConRadius(ND_FiBwDrain) + R_FitHand, H_BackwashBoxes, [0; 90; 0]*deg)
MidBwBucketInner := CylinderF([
    -cos(AN_BwMod)*L_FiBwVertCenterLine + FiPipe_Origin[0] - R_FitHand;
    -sin(AN_BwMod)*L_FiBwVertCenterLine + FiPipe_Origin[1];
    Tank_Origin[2] + H_Wall + T_TankWall + .08*ConRadius(ND_FiBwDrain)
], 1.72*ConRadius(ND_FiBwDrain) + R_FitHand, H_BackwashBoxes, [0; 90; 0]*deg)
SubtractBwBuckets := SubtractF(["BwBuckets"], "DeleteMe")
DrainChannelLyr := layer_new("DrainChannel", grey)
DCBox := BoxF([
    -cos(AN_BwMod)*L_FiBwVertCenterLine + ConRadius(ND_FiBwDrain) + FiPipe_Origin[0] + 2*S_Fitting;
    FlowDistributionTank_Origin[1];
    Tank_Origin[2] + H_Wall + T_TankWall
], [
    -cos(AN_BwMod)*L_FiBwVertCenterLine + ConRadius(ND_FiBwDrain) + FiPipe_Origin[0] + T_Et + 2*S_Fitting;
    FlowDistributionTank_Origin[1] + W_Wall;
    Tank_Origin[2] + H_Wall + T_TankWall + H_DrainChannel
], [0; 0; 0]*deg)
DrainChannelFrz := FreezeLayer("DrainChannel")
DrainChannel := stack(BwBucketsLyr, NorthBwBucketOuter, MirrorBwBucket, MidBwBucketOuter, FreezeBwBuckets, NorthBwBucketInner, MirrorBwBucket, MidBwBucketInner, GroupDelete, SubtractBwBuckets, DrainChannelLyr, DCBox, DrainChannelFrz)
# Chem Tanks
CoagTank_Origin := [
    -max(R_CoagTank, R_ChlorineTank) + ChemPlatform_Origin[0] - S_Fitting/2;
    -(S_Fitting/2 + R_CoagTank) + ChemPlatform_Origin[1] + W_ChemPlatform;
    ChemPlatform_Origin[2]
]
ChemTankLyr := layer_new("ChemicalTanks", yellow)
CoagTank := CylinderF(CoagTank_Origin, R_CoagTank + T_ChemTankWall, H_CoagTank + T_ChemTankWall, [0; 90]*deg)
ChemTankFrz := FreezeLayer("ChemicalTanks")
CoagTankInner := CylinderF(CoagTank_Origin + [0; 0; T_ChemTankWall], R_CoagTank, H_CoagTank, [0; 90]*deg)
HollowTanks := SubtractF(["ChemicalTanks"], "DeleteMe")
ChemTanksScript := stack(ChemTankLyr, CoagTank, ChemTankFrz, CoagTankInner, GroupDelete, HollowTanks, ThawMultiple(["ChemicalTanks"]), Array_All(1, 2, -(2*R_CoagTank + S_Fitting/2)), FreezeLayer("ChemicalTanks"))
# Slotted Pipe Molded
SlottedPipe_Origin := [0; 0; 0]*m
OuterMold_Origin := [outerdiameter(ND_FiManTrunk)/2 - L_BranchExtend; -(1.1*ConRadius(ND_FiManBranch)); 0] + SlottedPipe_Origin
FiSlottedSampleLyr := layer_new("FiSlottedSample", blue)
SlottedPipe := PipeF([0; 0; 0]*m, L_FiManBranch[0], [0; 0]*deg, ND_FiManBranch, PS_Fi)
FiSlottedSampleFrz := FreezeLayer("FiSlottedSample")
PipeMoldOuter := CylinderF(OuterMold_Origin, outerdiameter(ND_FiManTrunk)/2, 2.2*ConRadius(ND_FiManBranch), [270; 0]*deg)
PipeSubtraction := CylinderF(SlottedPipe_Origin, D_BranchSlotOrifice/2, outerdiameter(ND_FiManTrunk), [0; 0]*deg)
SubtractMold := SubtractAll(OuterMold_Origin)
SquishPipe := SubtractF(["FiSlottedSample"], "DeleteMe")
L_SlotFromCenter := sqrt((innerdiameter(ND_FiManBranch, PS_Fi)/2)^2 - (L_slots/2)^2)
L_FiBranchAvail := L_FiManBranch[0] - 0.75*CapHeight(ND_FiManBranch) - L_BranchExtend
B_Slots := (L_FiBranchAvail - W_slots)/(0.5*N_slots*L_FiBranchAvail - 1)
N_FiSlotsOneSide := Ceil(L_FiBranchAvail*N_slots*0.5, 1)
SlotBox := BoxF([
    -L_BranchExtend - 0.25*CapHeight(ND_FiManBranch) - W_slots;
    L_SlotFromCenter;
    outerdiameter(ND_FiManBranch)
] + SlottedPipe_Origin, [
    -L_BranchExtend - 0.25*CapHeight(ND_FiManBranch);
    outerdiameter(ND_FiManBranch);
    -outerdiameter(ND_FiManBranch)
] + SlottedPipe_Origin, [0; 0; 0]*deg)
MirrorSlot := MirrorLast([SlottedPipe_Origin[0]; SlottedPipe_Origin[1]], [SlottedPipe_Origin[0] - zc; SlottedPipe_Origin[1]], "n")
ArraySlots := Array_All(1, N_FiSlotsOneSide, -B_Slots)
SubtractSlots := SubtractF(["FiSlottedSample"], "DeleteMe")
SlottedSampleCapLyr := layer_new("FiSlottedCapSample", red)
SampleCap := CutCapF(SlottedPipe_Origin - [L_FiManBranch[0]; 0; 0], CapHeight(ND_FiManBranch)/2, [180; 0]*deg, ND_FiManBranch)  # error: This value must be a vector.
SlottedSampleCapFrz := FreezeLayer("FiSlottedCapSample")
FiSlottedSample := stack(FiSlottedSampleLyr, SlottedPipe, FiSlottedSampleFrz, PipeMoldOuter, GroupDelete, PipeSubtraction, SubtractMold, SquishPipe, SlotBox, MirrorSlot, ArraySlots, GroupDelete, SubtractSlots, SlottedSampleCapLyr, SampleCap, SlottedSampleCapFrz)
# Filtered Water Plumbing
# L means the lower line for waste
# U means the upper line for storage
CleanWaterElbowFromFiSouth_Origin := [
    -(cos(AN_FiIn)*L_FiPipeToOutletVertCenterLine) + FiPipe_Origin[0];
    Tank_Origin[1] + 2*ConRadius(ND_RMPipe) + ConRadius(ND_FiInlet);
    FiOutletManElbow_Origin[2] + 4*T_FiLayer + 2*SocketDepth(ND_FiInlet) + ShortTeeLength(ND_FiInlet)
]
CleanWaterTeeToStorageU_Origin := [
    CleanWaterElbowFromFiSouth_Origin[0];
    FiPipe3_Origin[1] + (FiPipe2_Origin[1] - FiPipe3_Origin[1])*0.5;
    CleanWaterElbowFromFiSouth_Origin[2] + ElbowRadius(ND_FiInlet) - ShortTeeLength(ND_FiInlet)
]
CleanWaterElbowToStorageL_Origin := [
    CleanWaterTeeToStorageU_Origin[0];
    CleanWaterTeeToStorageU_Origin[1] + ElbowRadius(ND_FiInlet);
    FiPipe_Origin[2]
]
CleanWaterTeeToWasteSouth_Origin := CleanWaterTeeToStorageU_Origin + [0; -(TeeLength(ND_FiInlet) + 2*SocketDepth(ND_FiInlet) + BallValveLength(ND_FiInlet)); 0]
CleanWaterReducerToWasteSouth_Origin := CleanWaterTeeToWasteSouth_Origin + [0; 0; -2*SocketDepth(ND_FiInlet)]
WasteValveSouth_Origin := CleanWaterReducerToWasteSouth_Origin + [0; 0; -2*SocketDepth(ND_CleanWaterOutlet) - BallValveSocket(ND_CleanWaterOutlet)]
CleanWaterValveSouth_Origin := CleanWaterTeeToWasteSouth_Origin + [
    0;
    ShortTeeLength(ND_FiInlet) + SocketDepth(ND_FiInlet) + BallValveLength(ND_FiInlet) - BallValveSocket(ND_FiInlet);
    ShortTeeLength(ND_FiInlet)
]
CleanWaterValveMid_Origin := CleanWaterTeeToStorageU_Origin + [
    0;
    ShortTeeLength(ND_FiInlet) + SocketDepth(ND_FiInlet) + BallValveLength(ND_FiInlet) - BallValveSocket(ND_FiInlet);
    ShortTeeLength(ND_FiInlet)
]
CleanWaterTeeToWasteMid_Origin := CleanWaterTeeToStorageU_Origin + [0; TeeLength(ND_FiInlet) + 2*SocketDepth(ND_FiInlet) + BallValveLength(ND_FiInlet); 0]
CleanWaterReducerToWasteMid_Origin := CleanWaterTeeToWasteMid_Origin + [0; 0; -2*SocketDepth(ND_FiInlet)]
WasteValveMid_Origin := CleanWaterReducerToWasteMid_Origin + [0; 0; -2*SocketDepth(ND_CleanWaterOutlet) - BallValveSocket(ND_CleanWaterOutlet)]
CleanWaterElbowFromFiNorth_Origin := [
    -(cos(AN_FiIn)*L_FiPipeToOutletVertCenterLine) + FiPipe_Origin[0];
    sin(AN_FiIn)*L_FiPipeToOutletVertCenterLine + FiPipe_Origin[1];
    CleanWaterElbowFromFiSouth_Origin[2]
]
CleanWaterElbowFromFiMid_Origin := CleanWaterElbowFromFiNorth_Origin + [0; -B_Fi; 0]
CleanWaterElbowToStorageU_Origin := [0; 2*ConRadius(ND_FiInlet) + S_Fitting; 0] + CleanWaterElbowFromFiMid_Origin
CleanWaterTeeToWasteNorth_Origin := CleanWaterElbowToStorageU_Origin + [
    0;
    2*SocketDepth(ND_FiInlet) + BallValveLength(ND_FiInlet) + ShortTeeLength(ND_FiInlet) + ElbowRadius(ND_FiInlet);
    -ShortTeeLength(ND_FiInlet) + ElbowRadius(ND_FiInlet)
]
CleanWaterReducerToWasteNorth_Origin := CleanWaterTeeToWasteNorth_Origin + [0; 0; -2*SocketDepth(ND_FiInlet)]
WasteValveNorth_Origin := CleanWaterReducerToWasteNorth_Origin + [0; 0; -2*SocketDepth(ND_CleanWaterOutlet) - BallValveSocket(ND_CleanWaterOutlet)]
CleanWaterValveNorth_Origin := CleanWaterElbowToStorageU_Origin + [
    0;
    SocketDepth(ND_FiInlet) + BallValveLength(ND_FiInlet) - BallValveSocket(ND_FiInlet) + ElbowRadius(ND_FiInlet);
    ElbowRadius(ND_FiInlet)
]
CleanWaterTeeToStorageL_Origin := [
    CleanWaterElbowToStorageU_Origin[0];
    CleanWaterElbowToStorageU_Origin[1];
    FiPipe_Origin[2] + ShortTeeLength(ND_FiInlet)
]
CleanWaterElbowToStorageNorth_Origin := [
    CleanWaterElbowFromFiNorth_Origin[0];
    Tank_Origin[1] + W_Wall - ConRadius(ND_FiInlet) - ElbowRadius(ND_FiInlet);
    CleanWaterTeeToStorageL_Origin[2] - ShortTeeLength(ND_FiInlet)
]
FiAuxFittingsLyr := layer_new("AuxFittings", green)
CleanWaterElbowFromFiSouth := ElbowF(CleanWaterElbowFromFiSouth_Origin, [270; 270; 0]*deg, ND_FiInlet, PS_Fi)
CleanWaterTeeToWasteSouth := TeeF(CleanWaterTeeToWasteSouth_Origin, [90; 270; 0]*deg, ND_FiInlet, PS_Fi)
CleanWaterReducerToWasteSouth := reducerF(CleanWaterReducerToWasteSouth_Origin, [0; 270; 0]*deg, ND_FiInlet, ND_CleanWaterOutlet, SocketDepth(ND_CleanWaterOutlet), PS_Fi)
CleanWaterTeeToStorageU := TeeF(CleanWaterTeeToStorageU_Origin, [90; 270; 0]*deg, ND_FiInlet, PS_Fi)
CleanWaterTeeToWasteMid := TeeF(CleanWaterTeeToWasteMid_Origin, [90; 270; 0]*deg, ND_FiInlet, PS_Fi)
CleanWaterReducerToWasteMid := reducerF(CleanWaterReducerToWasteMid_Origin, [0; 270; 0]*deg, ND_FiInlet, ND_CleanWaterOutlet, SocketDepth(ND_CleanWaterOutlet), PS_Fi)
CleanWaterElbowFromFiMid := ElbowF(CleanWaterElbowFromFiMid_Origin, [90; 90; 0]*deg, ND_FiInlet, PS_Fi)
CleanWaterElbowFromFiNorth := ElbowF(CleanWaterElbowFromFiNorth_Origin, [90; 90; 0]*deg, ND_FiInlet, PS_Fi)
CleanWaterTeeToStorageL := TeeF(CleanWaterTeeToStorageL_Origin, [90; 90; 0]*deg, ND_FiInlet, PS_Fi)
CleanWaterElbowToStorageL := ElbowF(CleanWaterElbowToStorageL_Origin, [180; 270; 0]*deg, ND_FiInlet, PS_Fi)
CleanWaterTeeToWasteNorth := TeeF(CleanWaterTeeToWasteNorth_Origin, [90; 270; 0]*deg, ND_FiInlet, PS_Fi)
CleanWaterReducerToWasteNorth := reducerF(CleanWaterReducerToWasteNorth_Origin, [0; 270; 0]*deg, ND_FiInlet, ND_CleanWaterOutlet, SocketDepth(ND_CleanWaterOutlet), PS_Fi)
CleanWaterElbowToStorageU := ElbowF(CleanWaterElbowToStorageU_Origin, [270; 270; 0]*deg, ND_FiInlet, PS_Fi)
CleanWaterValveNorth := InsertDwg(BallValveDwg, [CleanWaterValveNorth_Origin[1]; CleanWaterValveNorth_Origin[2]; CleanWaterValveNorth_Origin[0]], ND_FiInlet, 0 deg)
CleanWaterValveMid := InsertDwg(BallValveDwg, [CleanWaterValveMid_Origin[1]; CleanWaterValveMid_Origin[2]; CleanWaterValveMid_Origin[0]], ND_FiInlet, 0 deg)
CleanWaterValveSouth := InsertDwg(BallValveDwg, [CleanWaterValveSouth_Origin[1]; CleanWaterValveSouth_Origin[2]; CleanWaterValveSouth_Origin[0]], ND_FiInlet, 0 deg)
WasteValveNorth := InsertDwg(BallValveDwg, [WasteValveNorth_Origin[1]; WasteValveNorth_Origin[2]; WasteValveNorth_Origin[0]], ND_CleanWaterOutlet, 90 deg)
WasteValveMid := InsertDwg(BallValveDwg, [WasteValveMid_Origin[1]; WasteValveMid_Origin[2]; WasteValveMid_Origin[0]], ND_CleanWaterOutlet, 90 deg)
WasteValveSouth := InsertDwg(BallValveDwg, [WasteValveSouth_Origin[1]; WasteValveSouth_Origin[2]; WasteValveSouth_Origin[0]], ND_CleanWaterOutlet, 90 deg)
StorageAndWasteValves := stack(view("r"), CleanWaterValveNorth, CleanWaterValveMid, CleanWaterValveSouth, WasteValveNorth, WasteValveMid, WasteValveSouth, view("t"))
FiAuxFittingsFrz := FreezeLayer("AuxFittings")
FiAuxFit := stack(FiAuxFittingsLyr, CleanWaterElbowFromFiSouth, CleanWaterTeeToWasteSouth, CleanWaterReducerToWasteSouth, CleanWaterElbowFromFiMid, CleanWaterElbowFromFiNorth, CleanWaterTeeToStorageL, CleanWaterTeeToWasteMid, CleanWaterReducerToWasteMid, CleanWaterTeeToStorageU, CleanWaterElbowToStorageL, CleanWaterTeeToWasteNorth, CleanWaterReducerToWasteNorth, CleanWaterElbowToStorageU, StorageAndWasteValves, FiAuxFittingsFrz)
FiAuxPipesLyr := layer_new("AuxPipes", blue)
L_SouthCleanWaterPipeU := CleanWaterTeeToWasteSouth_Origin[1] - CleanWaterElbowFromFiSouth_Origin[1] - ShortTeeLength(ND_FiInlet) - ElbowRadius(ND_FiInlet)
L_MidCleanWaterPipeU := CleanWaterElbowFromFiMid_Origin[1] - CleanWaterTeeToWasteMid_Origin[1] - ShortTeeLength(ND_FiInlet) - ElbowRadius(ND_FiInlet)
L_NorthCleanWaterPipeU := CleanWaterElbowFromFiNorth_Origin[1] - CleanWaterTeeToWasteNorth_Origin[1] - ShortTeeLength(ND_FiInlet) - ElbowRadius(ND_FiInlet)
L_SouthPipeToStorage := CleanWaterTeeToStorageU_Origin[2] - CleanWaterElbowToStorageL_Origin[2] - ElbowRadius(ND_FiInlet)
L_NorthPipeToStorage := CleanWaterElbowToStorageU_Origin[2] - CleanWaterElbowToStorageL_Origin[2] - ShortTeeLength(ND_FiInlet)
L_CleanWaterPipeL := CleanWaterElbowToStorageNorth_Origin[1] - ShortTeeLength(ND_FiInlet) - CleanWaterTeeToStorageL_Origin[1]
L_SouthCleanWaterPipeL := CleanWaterTeeToStorageL_Origin[1] - CleanWaterElbowToStorageL_Origin[1] - ShortTeeLength(ND_FiInlet)
L_WastePipeNorth := (WasteValveNorth_Origin[2] - Tank_Origin[2] - H_Wall - T_Floor)*.50
L_WastePipeMid := (WasteValveNorth_Origin[2] - Tank_Origin[2] - H_Wall - T_Floor)*.50
L_WastePipeSouth := (WasteValveNorth_Origin[2] - Tank_Origin[2] - H_Wall - T_Floor)*.50
FiSouthCleanWaterPipeU := PipeF(CleanWaterElbowFromFiSouth_Origin + [0; ElbowRadius(ND_FiInlet); ElbowRadius(ND_FiInlet)], L_SouthCleanWaterPipeU, [270; 0; 0]*deg, ND_FiInlet, PS_Fi)
FiMidCleanWaterPipeU := PipeF(CleanWaterElbowFromFiMid_Origin + [0; -ElbowRadius(ND_FiInlet); ElbowRadius(ND_FiInlet)], L_MidCleanWaterPipeU, [90; 0; 0]*deg, ND_FiInlet, PS_Fi)
FiNorthCleanWaterPipeU := PipeF(CleanWaterElbowFromFiNorth_Origin + [0; -ElbowRadius(ND_FiInlet); ElbowRadius(ND_FiInlet)], L_NorthCleanWaterPipeU, [90; 0; 0]*deg, ND_FiInlet, PS_Fi)
FiSouthCleanWaterPipeL := PipeF(CleanWaterTeeToStorageL_Origin + [0; -ShortTeeLength(ND_FiInlet); -ShortTeeLength(ND_FiInlet)], L_SouthCleanWaterPipeL, [90; 0; 0]*deg, ND_FiInlet, PS_Fi)
FiNorthCleanWaterPipeL := PipeF(CleanWaterElbowToStorageNorth_Origin, L_CleanWaterPipeL, [90; 0; 0]*deg, ND_FiInlet, PS_Fi)
FiNorthWastePipe := PipeF(WasteValveNorth_Origin + [0; 0; -BallValveLength(ND_FiInlet) + 2*SocketDepth(ND_FiInlet)], (WasteValveNorth_Origin[2] - Tank_Origin[2] - H_Wall - T_Floor)*.50, [0; 270; 0]*deg, ND_CleanWaterOutlet, PS_Fi)
FiMidWastePipe := PipeF(WasteValveMid_Origin + [0; 0; -BallValveLength(ND_FiInlet) + 2*SocketDepth(ND_FiInlet)], (WasteValveNorth_Origin[2] - Tank_Origin[2] - H_Wall - T_Floor)*.50, [0; 270; 0]*deg, ND_CleanWaterOutlet, PS_Fi)
FiSouthWastePipe := PipeF(WasteValveSouth_Origin + [0; 0; -BallValveLength(ND_FiInlet) + 2*SocketDepth(ND_FiInlet)], (WasteValveNorth_Origin[2] - Tank_Origin[2] - H_Wall - T_Floor)*.50, [0; 270; 0]*deg, ND_CleanWaterOutlet, PS_Fi)
SouthPipeToStorage := PipeF(CleanWaterTeeToStorageU_Origin, L_SouthPipeToStorage, [0; 270; 0]*deg, ND_FiInlet, PS_Fi)
NorthPipeToStorage := PipeF(CleanWaterElbowToStorageU_Origin, L_NorthPipeToStorage, [0; 270; 0]*deg, ND_FiInlet, PS_Fi)
FiAuxPipesFrz := FreezeLayer("AuxPipes")
FiAuxPipes := stack(FiAuxPipesLyr, FiSouthCleanWaterPipeU, FiMidCleanWaterPipeU, FiNorthCleanWaterPipeU, FiSouthCleanWaterPipeL, FiNorthCleanWaterPipeL, FiNorthWastePipe, FiMidWastePipe, FiSouthWastePipe, SouthPipeToStorage, NorthPipeToStorage, FiAuxPipesFrz)
FiAuxPlumbing := stack(FiAuxFit, FiAuxPipes)
# Plumbing To Storage
CleanWaterElbowToStorageNorthU_Origin := [
    CleanWaterElbowToStorageNorth_Origin[0];
    ElbowRadius(ND_FiInlet) + CleanWaterElbowToStorageNorth_Origin[1];
    CleanWaterElbowToStorageNorth_Origin[2] + ElbowRadius(ND_FiInlet) + H_Bucket5Gal
]
CleanWaterTeeToStorage_Origin := [
    FiPipe_Origin[0] + ConRadius(ND_FiPipe) + ConRadius(ND_FiInlet);
    CleanWaterElbowToStorageNorth_Origin[1] + ElbowRadius(ND_FiInlet);
    CleanWaterElbowToStorageNorthU_Origin[2] + ElbowRadius(ND_FiInlet) - ShortTeeLength(ND_FiInlet)
]
CleanWaterOutletReducer_Origin := CleanWaterTeeToStorage_Origin + [0; 0; -2*SocketDepth(ND_FiInlet)]
CleanWaterCouplingToStorage_Origin := [
    CleanWaterTeeToStorage_Origin[0] + ShortTeeLength(ND_FiInlet) + 2*SocketDepth(ND_FiInlet) + ElbowRadius(ND_FiInlet);
    CleanWaterTeeToStorage_Origin[1];
    Tank_Origin[2] + H_Wall + T_TankWall - SocketDepth(ND_FiInlet)
]
CleanWaterOutletElbow_Origin := [
    CleanWaterCouplingToStorage_Origin[0];
    CleanWaterCouplingToStorage_Origin[1];
    CleanWaterTeeToStorage_Origin[2] + ShortTeeLength(ND_FiInlet) - ElbowRadius(ND_FiInlet)
]
CleanWaterOutletValve_Origin := [
    CleanWaterOutletReducer_Origin[0];
    CleanWaterOutletReducer_Origin[1];
    CleanWaterOutletReducer_Origin[2] - (2*SocketDepth(ND_CleanWaterOutlet) + BallValveSocket(ND_CleanWaterOutlet))
]
FiFitToStorageLyr := layer_new("FiFittingsToStorage", green)
FiCleanWaterElbowNorth := ElbowF(CleanWaterElbowToStorageNorth_Origin, [0; 90; 0]*deg, ND_FiInlet, PS_Fi)
FiCleanWaterElbowNorthU := ElbowF(CleanWaterElbowToStorageNorthU_Origin, [180; 0; 270]*deg, ND_FiInlet, PS_Fi)
FiCleanWaterTeeToStorage := TeeF(CleanWaterTeeToStorage_Origin, [0; 0; 270]*deg, ND_FiInlet, PS_Fi)
FiCleanWaterCouplingToStorage := CouplingSUBF(CleanWaterCouplingToStorage_Origin, [0; 270; 0]*deg, ND_FiInlet, PS_Fi, ["Room"])
FiCleanWaterOutletReducer := reducerF(CleanWaterOutletReducer_Origin, [0; 270; 0]*deg, ND_FiInlet, ND_CleanWaterOutlet, SocketDepth(ND_CleanWaterOutlet), PS_Fi)
FiCleanWaterOutletElbow := ElbowF(CleanWaterOutletElbow_Origin, [0; 0; 90]*deg, ND_FiInlet, PS_Fi)
FiCleanWaterOutletValve := stack(view("f"), InsertDwg(BallValveDwg, [CleanWaterOutletValve_Origin[0]; CleanWaterOutletValve_Origin[2]; -CleanWaterOutletValve_Origin[1]], ND_CleanWaterOutlet, 90 deg), view("t"))
FiFitToStorageFrz := FreezeLayer("FiFittingsToStorage")
FiFitToStorage := stack(FiFitToStorageLyr, FiCleanWaterElbowNorth, FiCleanWaterElbowNorthU, FiCleanWaterTeeToStorage, FiCleanWaterCouplingToStorage, FiCleanWaterOutletReducer, FiCleanWaterOutletValve, FiCleanWaterOutletElbow, FiFitToStorageFrz)
FiPlumbingToStorageLyr := layer_new("FiPlumbingToStorage", blue)
L_FiUpCleanWaterPipe := CleanWaterElbowToStorageNorthU_Origin[2] - CleanWaterElbowToStorageNorth_Origin[2] - ElbowRadius(ND_FiInlet)
L_FiPerpCleanWaterPipe := CleanWaterTeeToStorage_Origin[0] - CleanWaterElbowToStorageNorthU_Origin[0] - ShortTeeLength(ND_FiInlet) - ElbowRadius(ND_FiInlet)
L_FiDownCleanWaterPipe := CleanWaterOutletElbow_Origin[2] - CleanWaterCouplingToStorage_Origin[2]
L_FiIntCleanWaterPipe := 0.9*H_Wall
FiUpCleanWaterPipe := PipeF(CleanWaterElbowToStorageNorthU_Origin, L_FiUpCleanWaterPipe, [0; 270; 0]*deg, ND_FiInlet, PS_Fi)
FiPerpCleanWaterPipe := PipeF(CleanWaterTeeToStorage_Origin + [-ShortTeeLength(ND_FiInlet); 0; ShortTeeLength(ND_FiInlet)], L_FiPerpCleanWaterPipe, [0; 0; 0]*deg, ND_FiInlet, PS_Fi)
FiDownCleanWaterPipe := PipeF(CleanWaterOutletElbow_Origin, L_FiDownCleanWaterPipe, [0; 270; 0]*deg, ND_FiInlet, PS_Fi)
FiIntCleanWaterPipe := PipeSUBF(CleanWaterCouplingToStorage_Origin + [0; 0; -CouplingLength(ND_FiInlet) + 2*SocketDepth(ND_FiInlet)], L_FiIntCleanWaterPipe, [0; 270; 0]*deg, ND_FiInlet, PS_Fi, ["Room"])
FiPlumbingToStorageFrz := FreezeLayer("FiPlumbingToStorage")
FiPipesToStorage := stack(FiPlumbingToStorageLyr, FiUpCleanWaterPipe, FiPerpCleanWaterPipe, FiDownCleanWaterPipe, FiIntCleanWaterPipe, FiPlumbingToStorageFrz)
FiToStoragePlumbing := stack(FiFitToStorage, FiPipesToStorage)
# LFOM Plumbing
FiLfomCoupling_Origin := [-L_Et + S_Fitting + ConRadius(ND_RMPipe); ConRadius(ND_RMPipe); -SocketDepth(ND_RMPipe)] + FlowMeteringTank_Origin
FiLfomElbow_Origin := [
    FiLfomCoupling_Origin[0];
    FiLfomCoupling_Origin[1];
    FlowDistributionTank_Origin[2] - max(CouplingLength(ND_RMPipe), T_Et) - SocketDepth(ND_RMPipe)
]
FiDistInletCoupling_Origin := [
    -S_Fitting - ConRadius(ND_RMPipe) + FlowDistributionTank_Origin[0];
    FiLfomCoupling_Origin[1];
    -SocketDepth(ND_RMPipe) + FlowDistributionTank_Origin[2]
]
FiDistInletElbow_Origin := [
    FiDistInletCoupling_Origin[0];
    FiLfomCoupling_Origin[1];
    FlowDistributionTank_Origin[2] - max(CouplingLength(ND_RMPipe), T_Et) - SocketDepth(ND_RMPipe)
]
RMPipeLyr := layer_new("RapidMixPipes", blue)
FiLfom := PipeF(FiLfomCoupling_Origin, H_Et, [0; 90]*deg, ND_RMPipe, PS_Fi)
LfomOrifices :=
    Local ← FiLfom
    for h ∈ 0 .. last(H_LfomOrifices)
        if N_LfomOrifices[h] ≠ 0
            Local ← stack(Local, CylinderF([
                FiLfomCoupling_Origin[0];
                FiLfomCoupling_Origin[1];
                FlowMeteringTank_Origin[2] + CapHeight(ND_EtFloat) + S_Fitting + H_LfomOrifices[h]
            ], D_LfomOrifices/2, outerradius(ND_RMPipe) + zc, [
                (asin(0.5*S_LfomOrificesMin/(2*outerradius(ND_RMPipe))) + asin(D_LfomOrifices/(2*outerradius(ND_RMPipe))))*(mod(h, 2) == 0);
                0 deg
            ]))
        if N_LfomOrifices[h] > 1
            Local ← stack(Local, ArrayLastPolar([
                FiLfomCoupling_Origin[0];
                FiLfomCoupling_Origin[1];
                FlowMeteringTank_Origin[2] + CapHeight(ND_EtFloat) + S_Fitting + H_LfomOrifices[h]
            ], N_LfomOrifices[h], (N_LfomOrifices[h] - 1)*(2*asin(D_LfomOrifices/(2*outerradius(ND_RMPipe))) + 2*asin(S_LfomOrificesMin/(2*outerradius(ND_RMPipe))))))
    return Local
SubtractLfomOrifices := stack(view("t"), SubtractAll(FiLfomCoupling_Origin + [0; outerradius(ND_RMPipe); 0]))
L_RMPipeEast := FiLfomCoupling_Origin[2] - FiLfomElbow_Origin[2] - CouplingLength(ND_RMPipe) + 2*SocketDepth(ND_RMPipe)
L_RMPipeWest := FiDistInletCoupling_Origin[2] - FiDistInletElbow_Origin[2] - CouplingLength(ND_RMPipe) + 2*SocketDepth(ND_RMPipe)
L_RMPipeHoriz := FiLfomElbow_Origin[0] - FiDistInletElbow_Origin[0] - 2*ElbowRadius(ND_RMPipe)
RMPipeEastVert := PipeSUBF(FiLfomElbow_Origin, L_RMPipeEast, [0; 90]*deg, ND_RMPipe, PS_Fi, ["FlowMeteringTank"])
RMPipeWestVert := PipeSUBF(FiDistInletElbow_Origin, L_RMPipeWest, [0; 90]*deg, ND_RMPipe, PS_Fi, ["FlowDistributionTank"])
RMPipeHoriz := PipeF(FiLfomElbow_Origin + [-ElbowRadius(ND_RMPipe); 0; -ElbowRadius(ND_RMPipe)], L_RMPipeHoriz, [0; 0]*deg, ND_RMPipe, PS_Fi)
RMPipeFrz := FreezeLayer("RapidMixPipes")
RMPipes := stack(RMPipeLyr, LfomOrifices, SubtractLfomOrifices, RMPipeEastVert, RMPipeWestVert, RMPipeHoriz, RMPipeFrz)
RMFitLyr := layer_new("RapidMixFittings", green)
RMCouplingEast := CouplingSUBF(FiLfomCoupling_Origin, [0; 270; 0]*deg, ND_RMPipe, PS_Fi, ["FlowMeteringTank"])
RMElbowEast := ElbowF(FiLfomElbow_Origin, [0; 0; 270]*deg, ND_RMPipe, PS_Fi)
FiDistInletCoupling := CouplingSUBF(FiDistInletCoupling_Origin, [0; 270; 0]*deg, ND_RMPipe, PS_Fi, ["FlowDistributionTank"])
FiDistInletElbow := ElbowF(FiDistInletElbow_Origin, [180; 0; 90]*deg, ND_RMPipe, PS_Fi)
RMFitFrz := FreezeLayer("RapidMixFittings")
RMFittings := stack(RMFitLyr, RMCouplingEast, RMElbowEast, FiDistInletCoupling, FiDistInletElbow, RMFitFrz)
RMPlumbing := stack(RMPipes, RMFittings)
# Channel Inlet Plumbing
FiDistInletCouplingNorth_Origin := [
    -cos(AN_FiIn)*L_FiPipeToInletVertCenterLine + FiPipe_Origin[0];
    -sin(AN_FiIn)*L_FiPipeToInletVertCenterLine + FiPipe_Origin[1];
    FlowDistributionTank_Origin[2] - SocketDepth(ND_FiInlet)
]
FiDistInletCouplingMid_Origin := [
    -cos(AN_FiIn)*L_FiPipeToInletVertCenterLine + FiPipe_Origin[0];
    -sin(AN_FiIn)*L_FiPipeToInletVertCenterLine - B_Fi + FiPipe_Origin[1];
    FlowDistributionTank_Origin[2] - SocketDepth(ND_FiInlet)
]
FiDistInletCouplingSouth_Origin := [
    -cos(AN_FiIn)*L_FiPipeToInletVertCenterLine + FiPipe_Origin[0];
    FiPipe3_Origin[1] + sin(AN_FiIn)*L_FiPipeToInletVertCenterLine;
    FlowDistributionTank_Origin[2] - SocketDepth(ND_FiInlet)
]
FiDistInletFitLyr := layer_new("FiDistInletFittings", green)
FiDistInletCouplingNorth := CouplingSUBF(FiDistInletCouplingNorth_Origin, [0; 270; 0]*deg, ND_FiInlet, PS_Fi, ["FlowDistributionTank"])
FiDistInletCouplingMid := CouplingSUBF(FiDistInletCouplingMid_Origin, [0; 270; 0]*deg, ND_FiInlet, PS_Fi, ["FlowDistributionTank"])
FiDistInletCouplingSouth := CouplingSUBF(FiDistInletCouplingSouth_Origin, [0; 270; 0]*deg, ND_FiInlet, PS_Fi, ["FlowDistributionTank"])
FiDistInletFitFrz := FreezeLayer("FiDistInletFittings")
FiDistInletFit := stack(FiDistInletFitLyr, FiDistInletCouplingNorth, FiDistInletCouplingMid, FiDistInletCouplingSouth, FiDistInletFitFrz)
FiDistInletPipeLyr := layer_new("FiDistInletPipes", blue)
FiDistInletPipeNorth := PipeF(FiDistInletCouplingNorth_Origin, H_FiDistTank + SocketDepth(ND_FiInlet), [0; 90]*deg, ND_FiInlet, PS_Fi)
FiDistInletPipeMid := PipeF(FiDistInletCouplingMid_Origin, H_FiDistTank + SocketDepth(ND_FiInlet), [0; 90]*deg, ND_FiInlet, PS_Fi)
FiDistInletPipeSouth := PipeF(FiDistInletCouplingSouth_Origin, H_FiDistTank + SocketDepth(ND_FiInlet), [0; 90]*deg, ND_FiInlet, PS_Fi)
DiFistInletPipeFrz := FreezeLayer("FiDistInletPipes")
FiDistInletOrificeNorth := CylinderF(FiDistInletCouplingNorth_Origin + [0; 0; H_OrificeBottom + D_InletOrifice/2 + SocketDepth(ND_FiInlet)], D_InletOrifice/2, outerradius(ND_FiInlet) + zc, [0; 0; 0]*deg)
FiDistInletOrificeMid := CylinderF(FiDistInletCouplingMid_Origin + [0; 0; H_OrificeBottom + D_InletOrifice/2 + SocketDepth(ND_FiInlet)], D_InletOrifice/2, outerradius(ND_FiInlet) + zc, [0; 0; 0]*deg)
FiDistInletOrificeSouth := CylinderF(FiDistInletCouplingSouth_Origin + [0; 0; H_OrificeBottom + D_InletOrifice/2 + SocketDepth(ND_FiInlet)], D_InletOrifice/2, outerradius(ND_FiInlet) + zc, [0; 0; 0]*deg)
SubtractFiInletOrifices := SubtractF(["FiDistInletPipes"], "DeleteMe")
FiDistInletPipes := stack(FiDistInletPipeLyr, FiDistInletPipeNorth, FiDistInletPipeMid, FiDistInletPipeSouth, DiFistInletPipeFrz, FiDistInletOrificeNorth, FiDistInletOrificeMid, FiDistInletOrificeSouth, GroupDelete, SubtractFiInletOrifices)
FiDistPlu := stack(FiDistInletFit, FiDistInletPipes)
# Chemical Doser
LA_Origin := [
    FlowMeteringTank_Origin[0] - L_Et - T_Et;
    FlowMeteringTank_Origin[1] + S_EtFloat/2 + W_Et/2;
    FlowMeteringTank_Origin[2] + H_Et + D_LABOrigintoLAOriginZ
]
LA2_Origin := [LA_Origin[0]; LA_Origin[1] - S_EtFloat - 1/8*in; LA_Origin[2]]
LADtFitting_Origin := [
    LA_Origin[0] + L_CdcLever - L_LAOriginToDtY + innerdiameter(ND_DropTube, PS_Modules)/2 - .02 in;
    LA_Origin[1] + 1/8*in + L_LAOriginToDtCenterX;
    L_LAOriginToDtZ + LA2_Origin[2]
]
LAReducerFitting_Origin := [-L_LAOriginToReducerY - T_CdcReducer + L_CdcLever/2; L_LAOriginToReducerX; L_LAOriginToDtZ] + LA_Origin
LADt_Center := [
    LA_Origin[0] + L_CdcLever - L_LAOriginToDtY;
    LA_Origin[1] + L_LAOriginToDtCenterX;
    LA_Origin[2] + L_LAOriginToDtZ + H_LeverArm
]
LAReducer_Center := LA_Origin + [-L_LAOriginToReducerCenterY; L_LAOriginToReducerCenterX; L_LAOriginToDtZ]
LA2DtFitting_Origin := [
    LA2_Origin[0] + L_CdcLever - L_LAOriginToDtY + innerdiameter(ND_DropTube, PS_Modules)/2 - .02 in;
    LA2_Origin[1] + 1/8*in + L_LAOriginToDtCenterX;
    LA2_Origin[2] + L_LAOriginToDtZ
]
LA2ReducerFitting_Origin := [-L_LAOriginToReducerY - T_CdcReducer + L_CdcLever/2; L_LAOriginToReducerX; L_LAOriginToDtZ] + LA2_Origin
LA2Dt_Center := [
    LA2_Origin[0] + L_CdcLever - L_LAOriginToDtY;
    LA2_Origin[1] + L_LAOriginToDtCenterX;
    LA2_Origin[2] + L_LAOriginToDtZ + H_LeverArm
]
LA2Reducer_Center := LA2_Origin + [-L_LAOriginToReducerCenterY; L_LAOriginToReducerCenterX; L_LAOriginToDtZ]
CdcSliderLyr := layer_new("CdcSlider", grey)
SliderNorth := BoxF([LADt_Center[0] - 1 in; LADt_Center[1] - outerradius(ND_DropTube); LA_Origin[2] - 1/4*in], [
    LADt_Center[0] + 1 in;
    LADt_Center[1] - outerradius(ND_DropTube) - 3/4*in;
    LA_Origin[2] + H_LeverArm - 1/4*in
], [0; 0; 0]*deg)
SliderSouth := BoxF([
    LA2Dt_Center[0] - 1 in;
    LADt_Center[1] - outerradius(ND_DropTube) - S_EtFloat - 1/8*in;
    LA_Origin[2] - 1/4*in
], [
    LA2Dt_Center[0] + 1 in;
    LADt_Center[1] - outerradius(ND_DropTube) - 3/4*in - S_EtFloat - 1/8*in;
    LA_Origin[2] + H_LeverArm - 1/4*in
], [0; 0; 0]*deg)
CdcSliderFrz := FreezeLayer("CdcSlider")
NorthLArmSubBox := BoxF([LADt_Center[0] - 2 in; LA_Origin[1] + 1/8*in; LA_Origin[2]], [LADt_Center[0] + 2 in; LA_Origin[1]; LA_Origin[2] + H_LeverArm], [0; 0; 0]*deg)
SouthLArmSubBox := BoxF([LA2Dt_Center[0] - 2 in; LA_Origin[1] - S_EtFloat - 1/8*in; LA_Origin[2]], [LA2Dt_Center[0] + 2 in; LA_Origin[1] - S_EtFloat; LA_Origin[2] + H_LeverArm], [0; 0; 0]*deg)
SubtractLArm := SubtractF(["CdcSlider"], "DeleteMe")
CdcSlider := stack(CdcSliderLyr, SliderNorth, SliderSouth, CdcSliderFrz, NorthLArmSubBox, SouthLArmSubBox, GroupDelete, SubtractLArm)
W_Bracket := 2 in
CdcBracketLyr := layer_new("CdcBracket", ltgrey)
BracketOuter := BoxF([LA_Origin[0]; LA_Origin[1] + 1/4*in; FlowMeteringTank_Origin[2] + H_Et], [LA_Origin[0] + W_Bracket; LA_Origin[1] - S_EtFloat - 1/4*in; LA_Origin[2] + H_LeverArm], [0; 0; 0]*deg)
CdcBracketFrz := FreezeLayer("CdcBracket")
BracketInner := BoxF([LA_Origin[0] - zc; LA_Origin[1] + 1/8*in; FlowMeteringTank_Origin[2] + H_Et + 1/8*in], [LA_Origin[0] + 2 in + zc; LA_Origin[1] - S_EtFloat - 1/8*in; LA_Origin[2] + H_LeverArm + 1/8*in], [0; 0; 0]*deg)
SubtractBracket := SubtractF(["CdcBracket"], "DeleteMe")
CdcBracket := stack(CdcBracketLyr, BracketOuter, CdcBracketFrz, BracketInner, GroupDelete, SubtractBracket)
CdcLayer := layer_new("CdcLayer", ltgrey)
LArmOuter := BoxF([LA_Origin[0] - L_CdcLever - 1/2*in; LA_Origin[1] + 1/8*in; LA_Origin[2]], [LA_Origin[0] + L_CdcLever + 1/2*in; LA_Origin[1] - S_EtFloat - 1/8*in; LA_Origin[2] + H_LeverArm], [0; 0; 0]*deg)
LArmInner := BoxF([LA_Origin[0] - L_CdcLever; LA_Origin[1]; LA_Origin[2] - zc], [LA_Origin[0] + L_CdcLever; LA_Origin[1] - S_EtFloat; LA_Origin[2] + H_LeverArm + zc], [0; 0; 0]*deg)
SubtractLArmInner := SubtractF(["CdcLayer"], "DeleteMe")
SelectCdcLyr := SelectLayer("CdcLayer")
LArmBar := CylinderSUBF([LA_Origin[0] + W_Bracket/2; LA_Origin[1] + 1/2*in; LA_Origin[2] + H_LeverArm/2], R_LArmBar, S_EtFloat + 1 in, [90; 0]*deg, ["CdcLayer"])
DropTube1 := PipeF(LADt_Center, L_DropTube, [0; -90]*deg, ND_DropTube, PS_Modules)
InsertCht := insertdwg("https://confluence.cornell.edu/download/attachments/173604905/CdcCht.dwg", CHT_Origin, 1, 1, 90 deg)
DropTube2 := PipeF(LA2Dt_Center, L_DropTube, [0; -90]*deg, ND_DropTube, PS_Modules)
InsertCht2 := insertdwg("https://confluence.cornell.edu/download/attachments/173604905/CdcCht.dwg", CHT2_Origin, 1, 1, 90 deg)
FreezeCdcLayer := FreezeLayer("CdcLayer")
CdcFloatLyr := layer_new("CdcFloat", yellow)
L_CdcFloat := LA_Origin[2] - (FlowMeteringTank_Origin[2] + H_Et - H_Freeboard - HL_Lfom + CapHeight(ND_EtFloat))
FloatCable := CylinderF([
    LA_Origin[0] + L_CdcLever;
    FlowMeteringTank_Origin[1] + W_Et/2;
    FlowMeteringTank_Origin[2] + H_Et - H_Freeboard - HL_Lfom + CapHeight(ND_EtFloat)
], D_Cable, L_CdcFloat, [0; 90]*deg)
CdcFloatCapTop := CapF([
    LA_Origin[0] + L_CdcLever;
    FlowMeteringTank_Origin[1] + W_Et/2;
    FlowMeteringTank_Origin[2] + H_Et - H_Freeboard - HL_Lfom + CapHeight(ND_EtFloat) - CapThickness(ND_EtFloat)
], [0; -90]*deg, ND_EtFloat)
CdcFloatCapBottom := CapF([
    LA_Origin[0] + L_CdcLever;
    FlowMeteringTank_Origin[1] + W_Et/2;
    FlowMeteringTank_Origin[2] + H_Et - H_Freeboard - HL_Lfom - CapHeight(ND_EtFloat) + CapThickness(ND_EtFloat)
], [0; 90]*deg, ND_EtFloat)
CdcFloatPipe := PipeF([
    LA_Origin[0] + L_CdcLever;
    FlowMeteringTank_Origin[1] + W_Et/2;
    FlowMeteringTank_Origin[2] + H_Et - H_Freeboard - HL_Lfom + CapHeight(ND_EtFloat) - CapThickness(ND_EtFloat)
], 2*CapHeight(ND_EtFloat) - 2*CapThickness(ND_EtFloat), [0; -90]*deg, ND_EtFloat, PS_Default)
CdcFloatFrz := FreezeLayer("CdcFloat")
CdcFloat := stack(CdcFloatLyr, FloatCable, CdcFloatCapTop, CdcFloatCapBottom, CdcFloatPipe, CdcFloatFrz)
ChemDoser := stack(CdcSlider, CdcBracket, CdcLayer, LArmOuter, FreezeCdcLayer, LArmInner, GroupDelete, SubtractLArmInner, SelectCdcLyr, LArmBar, DropTube1, DropTube2, FreezeCdcLayer, CdcFloat)
# Roof
H_Standing := 7.5 ft = 2.286 m
Z_RoofHigh := Z_ChemPlatformTop + H_Standing
Z_RoofLow := FlowDistributionTank_Origin[2] + H_FiDistTank + 4/5*H_Standing
WedgeRoofCut := WedgeF(Tank_Origin + [-L_Wall - T_TankWall - zc; -T_TankWall - zc; Z_RoofHigh + zc], Tank_Origin + [T_TankWall + zc; W_Wall + T_TankWall + zc; Z_RoofLow + zc], [0; 0; 0]*deg)
SubtractRoof := SubtractF(["Room"], "DeleteMe")
RoofLyr := layer_new("Roof", purple)
AN_Roof := atan((Z_RoofHigh - Z_RoofLow)/(L_Wall + 2*(T_TankWall + zc)))
Roof := BoxF(Tank_Origin + [T_TankWall + zc; W_Wall + T_TankWall + zc; Z_RoofHigh + zc], Tank_Origin + [
    T_TankWall + zc - sqrt((Z_RoofHigh - Z_RoofLow)^2 + ((L_Wall + 2*(T_TankWall + zc))^2));
    -T_TankWall - zc;
    Z_RoofHigh + zc - T_EtBaffle
], [0; -AN_Roof/deg; 0]*deg)
FrzRoof := FreezeLayer("Roof")
Roof := stack(WedgeRoofCut, GroupDelete, SubtractRoof, RoofLyr, Roof, FrzRoof)
# Plant Drains
# Chem Drains
ChemDrainCoupling_Origin := [
    Tank_Origin[0] - ConRadius(ND_ChemPlatformDrain);
    Tank_Origin[1] - ConRadius(ND_ChemPlatformDrain) + W_Wall;
    Z_ChemPlatformTop - SocketDepth(ND_ChemPlatformDrain)
]
ChemDrainElbowR_Origin := [
    ChemDrainCoupling_Origin[0];
    ChemDrainCoupling_Origin[1];
    Z_DoorTop + ConRadius(ND_ChemPlatformDrain) + ElbowRadius(ND_ChemPlatformDrain)
]
ChemDrainElbowUnder_Origin := [
    FlowDistributionTank_Origin[0];
    ChemDrainElbowR_Origin[1];
    ChemDrainElbowR_Origin[2] - ElbowRadius(ND_ChemPlatformDrain)
]
ChemDrainElbowDown_Origin := [
    ChemDrainElbowUnder_Origin[0] - ElbowRadius(ND_ChemPlatformDrain);
    ChemDrainElbowUnder_Origin[1] - ElbowRadius(ND_ChemPlatformDrain) - 2*ConRadius(ND_FiInlet) - ConRadius(ND_ChemPlatformDrain);
    ChemDrainElbowUnder_Origin[2]
]
DrainChannelElbow_Origin := [
    Tank_Origin[0] - L_Wall + ConRadius(ND_SystemDrain);
    Tank_Origin[1] + W_Wall + T_TankWall + SocketDepth(ND_SystemDrain);
    Tank_Origin[2] + H_Wall + T_TankWall
]
DrainChannelCoupling_Origin := [
    DrainChannelElbow_Origin[0];
    Tank_Origin[1] + W_Wall + SocketDepth(ND_SystemDrain);
    DrainChannelElbow_Origin[2]
]
DrainChannelElbowOutlet_Origin := DrainChannelElbow_Origin + [0; ElbowRadius(ND_SystemDrain); -Z_BottomLowerTank + ElbowRadius(ND_SystemDrain)]
SystemDrainFitLyr := layer_new("SystemDrainFittings", green)
ChemDrainCoupling := CouplingSUBF(ChemDrainCoupling_Origin, [0; 270]*deg, ND_ChemPlatformDrain, PS_Fi, ["OperatorAccess"])
ChemDrainElbowR := ElbowF(ChemDrainElbowR_Origin, [0; 0; 270]*deg, ND_ChemPlatformDrain, PS_Fi)
ChemDrainElbowUnder := ElbowF(ChemDrainElbowUnder_Origin, [90; 0; 0]*deg, ND_ChemPlatformDrain, PS_Fi)
ChemDrainElbowDown := ElbowF(ChemDrainElbowDown_Origin, [180; 90; 0]*deg, ND_ChemPlatformDrain, PS_Fi)
DrainChannelElbow := ElbowF(DrainChannelElbow_Origin, [0; 270; 0]*deg, ND_SystemDrain, PS_Fi)
DrainChannelCoupling := CouplingSUBF(DrainChannelCoupling_Origin, [270; 0]*deg, ND_SystemDrain, PS_Fi, ["Room"])
DrainElbowOutlet := ElbowF(DrainChannelElbowOutlet_Origin, [270; 90; 0]*deg, ND_SystemDrain, PS_Fi)
SystemDrainFitFrz := FreezeLayer("SystemDrainFittings")
SystemDrainFit := stack(SystemDrainFitLyr, ChemDrainCoupling, ChemDrainElbowR, ChemDrainElbowUnder, ChemDrainElbowDown, DrainChannelElbow, DrainChannelCoupling, DrainElbowOutlet, SystemDrainFitFrz)
SystemDrainPipesLyr := layer_new("SystemDrainPipes", blue)
L_ChemPlatformDrainPipe := ChemDrainCoupling_Origin[2] - CouplingLength(ND_ChemPlatformDrain) + 2*SocketDepth(ND_ChemPlatformDrain) - ChemDrainElbowR_Origin[2]
L_ChemPlatformDrainHoriz := ChemDrainElbowR_Origin[0] - ChemDrainElbowUnder_Origin[0] - ElbowRadius(ND_SystemDrain)
L_ChemPlatformDrainPerp := ChemDrainElbowUnder_Origin[1] - ChemDrainElbowDown_Origin[1] - ElbowRadius(ND_SystemDrain)
L_ChemDrainDown := (ChemDrainElbowUnder_Origin[2] - Tank_Origin[2] - H_Wall - T_TankWall)*0.85
L_DrainChannelPipe := DrainChannelElbow_Origin[1] - DrainChannelCoupling_Origin[1] - CouplingLength(ND_SystemDrain) + 2*SocketDepth(ND_SystemDrain)
L_DrainOutlet := Z_BottomLowerTank - 2*ElbowRadius(ND_SystemDrain)
ChemPlatformDrainPipe := PipeSUBF(ChemDrainElbowR_Origin, L_ChemPlatformDrainPipe, [0; 90; 0]*deg, ND_ChemPlatformDrain, PS_Fi, ["OperatorAccess"])
ChemDrainHoriz := PipeF(ChemDrainElbowR_Origin + [-ElbowRadius(ND_SystemDrain); 0; -ElbowRadius(ND_SystemDrain)], L_ChemPlatformDrainHoriz, [0; 0; 0]*deg, ND_ChemPlatformDrain, PS_Fi)
ChemDrainPerp := PipeF(ChemDrainElbowDown_Origin, L_ChemPlatformDrainPerp, [270; 0; 0]*deg, ND_ChemPlatformDrain, PS_Fi)
ChemDrainDown := PipeF(ChemDrainElbowDown_Origin + [0; -ElbowRadius(ND_SystemDrain); -ElbowRadius(ND_SystemDrain)], L_ChemDrainDown, [0; 270; 0]*deg, ND_ChemPlatformDrain, PS_Fi)
DrainChannelPipe := PipeSUBF(DrainChannelCoupling_Origin + [0; CouplingLength(ND_SystemDrain) - 2*SocketDepth(ND_SystemDrain); 0], L_DrainChannelPipe, [270; 0; 0]*deg, ND_SystemDrain, PS_Fi, ["Room"])
DrainOutletPipe := PipeF(DrainChannelElbow_Origin + [0; ElbowRadius(ND_SystemDrain); -ElbowRadius(ND_SystemDrain)], L_DrainOutlet, [0; 270; 0]*deg, ND_SystemDrain, PS_Fi)
SystemDrainPipesFrz := FreezeLayer("SystemDrainPipes")
SystemDrainPipes := stack(SystemDrainPipesLyr, ChemPlatformDrainPipe, ChemDrainHoriz, ChemDrainPerp, ChemDrainDown, DrainChannelPipe, DrainOutletPipe, SystemDrainPipesFrz)
SystemDrain := stack(SystemDrainFit, SystemDrainPipes)
L_SedimentSettle := 10 cm
ND_ChemDrains := 1/2*in
L_DosingBulkheadOffset := R_CoagTank - BulkheadSocketOuterD(ND_ChemDrains)*0.5/tan(asin(BulkheadSocketOuterD(ND_ChemDrains)/(2*R_CoagTank))) = 7.11154e-5 m
CoagDosingBulkhead_Origin := CoagTank_Origin + [0; -R_CoagTank + L_DosingBulkheadOffset; B_StockOutlet]
CoagDosingSlipToThread_Origin := CoagDosingBulkhead_Origin + [0; -BulkheadThreadLength(ND_ChemDrains) + SocketDepth(ND_ChemDrains); 0]
CoagDosingElbowU_Origin := CoagDosingSlipToThread_Origin + [0; SocketDepth(ND_ChemDrains) - CouplingLength(ND_ChemDrains); 0]
CoagDosingTee_Origin := [
    CoagDosingElbowU_Origin[0] + ShortTeeLength(ND_ChemDrains);
    -ElbowRadius(ND_ChemDrains) + CoagDosingElbowU_Origin[1];
    Z_ChemPlatformTop - T_Platform - SocketDepth(ND_ChemDrains) - ShortTeeLength(ND_ChemDrains)
]
CoagSedTrapValve_Origin := CoagDosingTee_Origin + [
    -ShortTeeLength(ND_ChemDrains);
    0;
    -SocketDepth(ND_ChemDrains) - BallValveSocket(ND_ChemDrains) - ShortTeeLength(ND_ChemDrains)
]
CoagSedTrapElbow_Origin := CoagSedTrapValve_Origin + [
    0;
    0;
    -BallValveLength(ND_ChemDrains) + BallValveSocket(ND_ChemDrains) - SocketDepth(ND_ChemDrains)
]
CoagDrainBulkhead_Origin := CoagTank_Origin
CoagDrainTee_Origin := [
    CoagDrainBulkhead_Origin[0];
    CoagDrainBulkhead_Origin[1];
    CoagSedTrapElbow_Origin[2] - ElbowRadius(ND_ChemDrains) + ShortTeeLength(ND_ChemDrains)
]
CoagDrainValve_Origin := CoagDrainTee_Origin + [0; 0; SocketDepth(ND_ChemDrains) + BallValveLength(ND_ChemDrains) - BallValveSocket(ND_ChemDrains)]
CoagDrainElbowWall_Origin := [
    CoagSedTrapElbow_Origin[0];
    Tank_Origin[1] + W_Wall - ElbowRadius(ND_ChemDrains) - ConRadius(ND_ChemDrains);
    CoagSedTrapElbow_Origin[2] - ElbowRadius(ND_ChemDrains)
]
CoagDosingElbow_Origin := [
    Tank_Origin[0] - ConRadius(ND_ChemDrains);
    CoagDosingTee_Origin[1] - ElbowRadius(ND_ChemDrains);
    CoagDosingTee_Origin[2]
]
ChlorineDosingElbow_Origin := [
    Tank_Origin[0] - W_ChemPlatform/2 + ConRadius(ND_ChemDrains);
    CoagDosingElbow_Origin[1];
    CoagDosingElbow_Origin[2]
]
CoagDosingElbowUp_Origin := [
    CoagDosingElbow_Origin[0];
    ChemPlatform_Origin[1] - ConRadius(ND_ChemDrains);
    ElbowRadius(ND_ChemDrains) + CoagDosingElbow_Origin[2]
]
CoagDosingElbowL_Origin := CoagDosingElbowUp_Origin + [0; 0; 2*SocketDepth(ND_ChemDrains)]
CoagDosingValve_Origin := [
    -ElbowRadius(ND_ChemDrains) - SocketDepth(ND_ChemDrains) - BallValveSocket(ND_ChemDrains);
    0;
    ElbowRadius(ND_ChemDrains)
] + CoagDosingElbowL_Origin
CoagTeeToCalCol_Origin := CoagDosingValve_Origin + [BallValveSocket(ND_ChemDrains) - BallValveLength(ND_ChemDrains) - SocketDepth(ND_ChemDrains); 0; 0]
CoagCalColValve_Origin := CoagTeeToCalCol_Origin + [-ShortTeeLength(ND_ChemDrains); 0; ShortTeeLength(ND_ChemDrains) + BallValveSocket(ND_ChemDrains)]
ChemFittingLyr := layer_new("ChemFittings", green)
CoagDosingBulkhead := InsertDwg(BulkheadDwg, CoagDosingBulkhead_Origin, ND_ChemDrains, 270 deg)
CoagDosingSlipToThread := CouplingF(CoagDosingSlipToThread_Origin, [90; 0; 0]*deg, ND_ChemDrains, PS_Fi)
CoagDosingElbowU := ElbowF(CoagDosingElbowU_Origin, [180; 90; 0]*deg, ND_ChemDrains, PS_Fi)
CoagDosingTee := TeeF(CoagDosingTee_Origin, [270; 0; 90]*deg, ND_ChemDrains, PS_Fi)
CoagSedTrapElbow := ElbowF(CoagSedTrapElbow_Origin, [270; 90; 0]*deg, ND_ChemDrains, PS_Fi)
CoagDrainTee := TeeF(CoagDrainTee_Origin, [90; 90; 0]*deg, ND_ChemDrains, PS_Fi)
CoagDrainElbowWall := ElbowF(CoagDrainElbowWall_Origin, [0; 270; 0]*deg, ND_ChemDrains, PS_Fi)
CoagSedTrapValve := InsertDwg(BallValveDwg, [CoagSedTrapValve_Origin[0]; CoagSedTrapValve_Origin[2]; -CoagSedTrapValve_Origin[1]], ND_ChemDrains, 90 deg)
CoagDrainValve := InsertDwg(BallValveDwg, [CoagDrainValve_Origin[0]; CoagDrainValve_Origin[2]; -CoagDrainValve_Origin[1]], ND_ChemDrains, 90 deg)
CoagDrainBulkhead := InsertDwg(BulkheadDwg, [CoagDrainBulkhead_Origin[0]; CoagDrainBulkhead_Origin[2]; -CoagDrainBulkhead_Origin[1]], ND_ChemDrains, 90 deg)
ChemFittingFrz := FreezeLayer("ChemFittings")
ChemFittings := stack(ChemFittingLyr, CoagDosingBulkhead, CoagDosingSlipToThread, CoagDosingElbowU, CoagDosingTee, CoagSedTrapElbow, CoagDrainTee, CoagDrainElbowWall, view("f"), CoagSedTrapValve, CoagDrainValve, CoagDrainBulkhead, view("t"), ChemFittingFrz)
ChemPipeLyr := layer_new("ChemPipes", blue)
L_ChemDosingPipeDown := CoagDosingElbowU_Origin[2] - CoagDosingTee_Origin[2] - ElbowRadius(ND_ChemDrains) - ShortTeeLength(ND_ChemDrains)
L_ChemDrainPipeDown := CoagDrainBulkhead_Origin[2] - CoagDrainValve_Origin[2]
L_ChemSedTrapToDrain := CoagDrainTee_Origin[1] - CoagSedTrapElbow_Origin[1] - ElbowRadius(ND_ChemDrains) - ShortTeeLength(ND_ChemDrains)
L_ChemDrainToWall := CoagDrainElbowWall_Origin[1] - CoagDrainTee_Origin[1] - ShortTeeLength(ND_ChemDrains)
ChemDosingPipeDown := PipeSUBF(CoagDosingElbowU_Origin + [0; -ElbowRadius(ND_ChemDrains); -ElbowRadius(ND_ChemDrains)], L_ChemDosingPipeDown, [0; 270; 0]*deg, ND_ChemDrains, PS_Fi, ["OperatorAccess"])
ChemDrainPipeDown := PipeF(CoagDrainBulkhead_Origin, L_ChemDrainPipeDown, [0; 270; 0]*deg, ND_ChemDrains, PS_Fi)
ChemSedTrapToDrain := PipeF(CoagSedTrapElbow_Origin + [0; ElbowRadius(ND_ChemDrains); -ElbowRadius(ND_ChemDrains)], L_ChemSedTrapToDrain, [270; 0; 0]*deg, ND_ChemDrains, PS_Fi)
ChemDrainToWall := PipeF(CoagDrainElbowWall_Origin, L_ChemDrainToWall, [90; 0; 0]*deg, ND_ChemDrains, PS_Fi)
ChemPipeFrz := FreezeLayer("ChemPipes")
ChemPipes := stack(ChemPipeLyr, ChemDosingPipeDown, ChemDrainPipeDown, ChemSedTrapToDrain, ChemDrainToWall, ChemPipeFrz)
ChemPlumbingInitial := stack(ChemFittings, ChemPipes, ThawMultiple(["Chem*"]), Array_All(1, 2, -(2*R_CoagTank + S_Fitting/2)), FreezeMultiple(["Chem*"]))
SelectCoagFit := SelectLayer("ChemFittings")
CoagDosingElbow := ElbowF(CoagDosingElbow_Origin, [0; 0; 0]*deg, ND_ChemDrains, PS_Fi)
ChloringDosingElbow := ElbowF(ChlorineDosingElbow_Origin, [0; 0; 0]*deg, ND_ChemDrains, PS_Fi)
SelectCoagPipe := SelectLayer("ChemPipes")
L_CoagDosingPipeToWall := CoagDosingElbow_Origin[0] - CoagDosingTee_Origin[0] - ElbowRadius(ND_ChemDrains)
L_ChlorineDosingPipeToWall := ChlorineDosingElbow_Origin[0] - (CoagDosingTee_Origin[0] - (2*R_CoagTank + S_Fitting/2)) - ElbowRadius(ND_ChemDrains)
CoagDosePipeToWall := PipeF(CoagDosingElbow_Origin + [-ElbowRadius(ND_ChemDrains); ElbowRadius(ND_ChemDrains); 0], L_CoagDosingPipeToWall, [0; 0; 0]*deg, ND_ChemDrains, PS_Fi)
ChlorineDosePipeToWall := PipeF(ChlorineDosingElbow_Origin + [-ElbowRadius(ND_ChemDrains); ElbowRadius(ND_ChemDrains); 0], L_ChlorineDosingPipeToWall, [0; 0; 0]*deg, ND_ChemDrains, PS_Fi)
ChemDosePipesToWall := stack(SelectCoagFit, CoagDosingElbow, ChloringDosingElbow, ChemFittingFrz, SelectCoagPipe, CoagDosePipeToWall, ChlorineDosePipeToWall, ChemPipeFrz)
CoagFitMLayer := layer_new("MChemFittings", green)
CoagDosingElbowUp := ElbowF(CoagDosingElbowUp_Origin, [270; 90; 0]*deg, ND_ChemDrains, PS_Fi)
CoagDosingElbowL := ElbowF(CoagDosingElbowL_Origin, [0; 0; 90]*deg, ND_ChemDrains, PS_Fi)
CoagDosingValve := InsertDwg(BallValveDwg, CoagDosingValve_Origin, ND_ChemDrains, 0 deg)
CoagTeeToCalCol := TeeF(CoagTeeToCalCol_Origin, [270; 0; 90]*deg, ND_ChemDrains, 0 deg)
CoagCalColValve := InsertDwg(BallValveDwg, [CoagCalColValve_Origin[0]; CoagCalColValve_Origin[2]; -CoagCalColValve_Origin[1]], ND_ChemDrains, 270 deg)
CoagFitMFrz := FreezeLayer("MChemFittings")
CoagFitM := stack(CoagFitMLayer, CoagDosingElbowUp, CoagDosingElbowL, CoagDosingValve, CoagTeeToCalCol, view("f"), CoagCalColValve, view("t"), CoagFitMFrz)
CoagPipeMLyr := layer_new("MChemPipes", blue)
L_CoagDosingPerp := CoagDosingElbow_Origin[1] - CoagDosingElbowUp_Origin[1] - ElbowRadius(ND_ChemDrains)
L_CalColPipe := 1 ft + SocketDepth(ND_ChemDrains)
CoagDosingPerpPipe := PipeF(CoagDosingElbow_Origin, L_CoagDosingPerp, [90; 0; 0]*deg, ND_ChemDrains, PS_Fi)
CoagCalCol := PipeF(CoagCalColValve_Origin + [0; 0; BallValveLength(ND_ChemDrains) - 2*BallValveSocket(ND_ChemDrains)], L_CalColPipe, [0; 90; 0]*deg, ND_ChemDrains, PS_Fi)
CoagPipeMFrz := FreezeLayer("MChemPipes")
CoagPipeM := stack(CoagPipeMLyr, CoagDosingPerpPipe, CoagCalCol, CoagPipeMFrz)
CoagM := stack(CoagFitM, CoagPipeM, ThawMultiple(["MChem*"]), MirrorGroup([Tank_Origin[0] - W_ChemPlatform/4; CoagTank_Origin[1]], [Tank_Origin[0] - W_ChemPlatform/4; CoagTank_Origin[1] + zc], "MChem*", "n"), FreezeMultiple(["MChem*"]))
ChemPlumbing := stack(ChemPlumbingInitial, ChemDosePipesToWall, CoagM)
# Chemical Drains/Dosing Plumbing
AC_LFSRSF := stack(FiBodyPipe, FiBwPlu, FiInExManPlu, FiTesterScript, FiCapsScript, FiSandDrainScript, FiArray, OpAccessScript, FiAuxPlumbing, RMPlumbing, DrainChannel, FiDistPlu, FiToStoragePlumbing, ChemDoser, Roof, SystemDrain, ChemPlumbing, ChemTanksScript)
