Q_Plant := 40*L/s
HL_FlocMax := 40 cm
H_SedSlopesToFlocWeirMin := 25 cm
T_FlocSlab := 15 cm
T_SedWall := 15 cm
T_SedDividingWall := 15 cm
T_SedChannelWall := 15 cm
T_FlocWall := 15 cm
T_FlocDividingWall := 15 cm
T_FiWall := 25 cm
T_FiBoxWall := 15 cm
T_PlantWall := 15 cm
T_PlantFloor := 20 cm
T_ChemSlab := 15 cm
T_DrainChannelWall := 15 cm
C_CoagDoseMax := 40*mg/L
C_ChlorDoseAve := 1*mg/L
# Mathcad to AutoCAD translators:
# [reference: MtoATranslators.xmcd]
# The wrapped MtoA translator contains the functions that the user will want to access. These functions will draw pieces with full functionality - specifying the location, dimension, and orientation of the object. Also, it contains layer control and subtraction capabilities for grouped objects.
# [reference: MtoATranslatorsWrapped.xmcd]
# [reference: ExpertInputs.xmcd]
# [reference: MathFunctions.xmcd]
# [reference: PipeDatabase.xmcd]
# [reference: MaterialsDatabase.xmcd]
# [reference: FluidsFunctions.xmcd]
# [reference: SedimentationTank.xmcd]
# [reference: LFOM.xmcd]
# [reference: FlocculatorEntranceTank.xmcd]
# [reference: StackedRapidSandFilter.xmcd]
# [reference: ChemicalDoseController.xmcd]
# [reference: ChannelF.xmcd]
# [reference: PlumbingF.xmcd]
# [reference: TankF.xmcd]
# [reference: StairsF.xmcd]
# [reference: DrainChannelF.xmcd]
# [reference: FlocculatorAC.xmcd]
# [reference: SedimentationTankAC.xmcd]
# LFOM AutoCAD
# LFOM Drawing
RMCoupling_Origin := Et_Origin + [-2*S_Fitting - OR_Fitting(ND_RMPipe); W_Et/2; Z_SedWeirExit]
# from EntranceTankCompactAC
RMPipe_Origin := RMCoupling_Origin + [0 m; 0 m; CouplingLength(ND_RMPipe) - 2*SocketDepth(ND_RMPipe)]
EtRMPipe := PipeSUBF(RMPipe_Origin, Z_EtTop - RMPipe_Origin[2], [0; 90]*deg, ND_RMPipe, SDR_41, ["EtCon"])
LFOM_Origin := [RMPipe_Origin[0]; RMPipe_Origin[1]; Plant_Origin[2] + Z_LfomBottom]
LfomOrifices :=
    Local ← EtRMPipeFrz
    for h ∈ 0 .. last(H_LfomOrifices)
        if N_LfomOrifices[h] ≠ 0
            Local ← stack(Local, CylinderF([LFOM_Origin[0]; LFOM_Origin[1]; LFOM_Origin[2] + H_LfomOrifices[h]], D_LfomOrifices/2, OR(ND_RMPipe) + zc, [
                90 deg + (asin(0.5*S_LfomOrificesMin/OD(ND_RMPipe)) + asin(D_LfomOrifices/OD(ND_RMPipe)))*(mod(h, 2) == 0);
                0 deg
            ]))
        Local ← stack(Local, ArrayLastPolar([LFOM_Origin[0]; LFOM_Origin[1]; LFOM_Origin[2] + H_LfomOrifices[h]], N_LfomOrifices[h], (N_LfomOrifices[h] - 1)*(2*asin(D_LfomOrifices/OD(ND_RMPipe)) + 2*asin(S_LfomOrificesMin/OD(ND_RMPipe))))) if N_LfomOrifices[h] > 1
    return Local
LfomLayer := layer_new("EtLfomPlu", blue)
L_RMVertPipe := L_RMVertPipeTop + L_LfomPipe + L_RMVertPipeBottom
RMVertPipe := PipeF([LFOM_Origin[0]; LFOM_Origin[1]; LFOM_Origin[2] - L_RMVertPipeBottom], L_RMVertPipe, [0; 90; 0]*deg, ND_RMPipe, "EtCon")
FreezeLfomLayer := FreezeLayer("EtLfomPlu")
SelectLfom := SelectLayer("EtLfomPlu")
LfomOrifices :=
    Local ← FreezeLfomLayer
    for h ∈ 0 .. last(H_LfomOrifices)
        if N_LfomOrifices[h] ≠ 0
            Local ← stack(Local, CylinderF([LFOM_Origin[0]; LFOM_Origin[1]; LFOM_Origin[2] + H_LfomOrifices[h]], D_LfomOrifices/2, outerradius(ND_RMPipe) + zc, [
                90 deg + (asin(0.5*S_LfomOrificesMin/(2*outerradius(ND_RMPipe))) + asin(D_LfomOrifices/(2*outerradius(ND_RMPipe))))*(mod(h, 2) == 0);
                0 deg
            ]))
        Local ← stack(Local, ArrayLastPolar([LFOM_Origin[0]; LFOM_Origin[1]; LFOM_Origin[2] + H_LfomOrifices[h]], N_LfomOrifices[h], (N_LfomOrifices[h] - 1)*(2*asin(D_LfomOrifices/(2*outerradius(ND_RMPipe))) + 2*asin(S_LfomOrificesMin/(2*outerradius(ND_RMPipe)))))) if N_LfomOrifices[h] > 1
    return Local
SubtractRMPipeOrifices := SubtractF(["EtLfomPlu"], "DeleteMe")
L_RMVertPipeTop := H_PlantFreeboard
AC_LFOM := stack(LfomLayer, RMVertPipe, FreezeLfomLayer, GroupAll("DeleteMe"), SubtractRMPipeOrifices, SelectLfom, LfomOrifices, GroupAll("DeleteMe"), SubtractRMPipeOrifices)
