# [reference: EtFlocSedFi.xmcd]
# A better way to get the pipe matrix from component to component is probably just to add a file input to the top of this script... This is just laziness because the SRSF parts have the halper functions and Ptrial functions already.
# This reference has all of the modified pipe matrix retrieving functions, including the PipeMatrix from the SRSF. Start with this?
# [reference: MaterialsListSRSFPipes.xmcd]
PMat = [
    1.10525, 0.1524, 8, 1;
    0.334, 0.2032, 8, 1;
    0.327, 0.1016, 8, 6;
    0.945249, 0.1016, 8, 1;
    0.943661, 0.2032, 8, 1;
    0.954455, 0.0508, 8, 4;
    0.480786, 0.0254, 2, 7;
    0.428399, 0.0381, 2, 19;
    0.114, 0.1524, 8, 1;
    0.284531, 0.1016, 8, 1
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] m
# Flocculator AutoCAD
# Dimensions | no pipes
TotalFloc_Dim := [L_Sed; (N_FlocChannels*W_FlocChannel) + ((N_FlocChannels - 1)*T_FlocChannelWall); H_Floc]
Wall_Dim := [TotalFloc_Dim[0] + 2*T_PlantWall; T_FlocChannelWall; TotalFloc_Dim[2]]
FlocPort_Dim :=
    for i ∈ 0 .. (N_FlocChannels - 2)
        FlocPort_Dim[0, i] ← [W_FlocPort[N_FlocChannels - 2 - i]; T_FlocChannelWall + 2*zc; (-H_FlocPort)[i]]
    return FlocPort_Dim
# Floc ports connect the channels.
ChannelOpening_Dim := [W_SedInletChannelPreWeir; T_PlantWall; Z_FlocTank + H_Floc - Z_SedChannelBottom] = [0.28415; 0.15; 0.475978] m
# normally want a 30deg slope, unless FlocModuleBaffle is too close
# set slope to be 5 cm away from nearest Baffle
FlocDrainSlope_Dim :=
    [sqrt(3)*H_FlocSlope; -D_FlocValve; H_FlocSlope] if sqrt(3)*H_FlocSlope < W_FlocPort[0] + S_FlocPortGap - 5 cm
    [W_FlocPort[0] + S_FlocPortGap - 5 cm; -D_FlocValve; H_FlocSlope] otherwise
Port_Dim := [T_FlocBaffle + 2*zc; L_BafflePort + L_Slot; L_BafflePort]
BaffleSlot1_Dim := [T_FlocBaffle; W_FlocChannel + 2*L_Slot; H_Floc - Z_FlocBaffles[0, 0]]
BaffleSlot1Last_Dim := [T_FlocBaffle; W_FlocChannel + 2*L_Slot; H_Floc - Z_FlocBaffles[0, N_FlocChannels - 1]]
BaffleSlot2_Dim := [T_FlocBaffle; W_FlocChannel + 2*L_Slot; H_Floc - Z_FlocBaffles[1, 0]]
BaffleSlot2Last_Dim := [T_FlocBaffle; W_FlocChannel + 2*L_Slot; H_Floc - Z_FlocBaffles[1, N_FlocChannels - 1]]
# no pipes
Floc_Origin := [
    Plant_Origin[0];
    Plant_Origin[1] + N_SedTanks*(W_Sed + T_SedWallDivider) + T_PlantWall - T_SedWallDivider;
    Plant_Origin[2] + Z_FlocTank
]
Wall_Origin := [Floc_Origin[0] - TotalFloc_Dim[0] - T_PlantWall; Floc_Origin[1] + W_FlocChannel; Floc_Origin[2]]
FlocCoupling_Origin := [
    Floc_Origin[0] + ConRadius(ND_RMPipe) + S_Fitting - L_Sed;
    Floc_Origin[1] + N_FlocChannels*W_FlocChannel + T_FlocChannelWall*(N_FlocChannels - 1) + SocketDepth(ND_RMPipe) - L_FlocCouplingExt;
    Floc_Origin[2] + outerradius(ND_RMPipe) + S_Fitting
]
FlocPort_Origin :=
    for i ∈ 0 .. (N_FlocChannels - 2)
        if mod(i, 2) == 1
            FlocPort_Origin[0, i] ← [
                Floc_Origin[0] - TotalFloc_Dim[0];
                Floc_Origin[1] + (W_FlocChannel*(1 + i)) + T_FlocChannelWall*i - zc;
                Floc_Origin[2] + H_FlocPort[i]
            ]
        otherwise
            FlocPort_Origin[0, i] ← [
                Floc_Origin[0] - W_FlocPort[N_FlocChannels - 2 - i];
                Floc_Origin[1] + (W_FlocChannel*(1 + i)) + T_FlocChannelWall*i - zc;
                Floc_Origin[2] + H_FlocPort[i]
            ]
    return FlocPort_Origin
# The flocport origins were set to start at the top height of the ports themselves (added to the origin otherwise it disappears).  This changes the flocports to be at the bottom of the channel dividing walls instead of at the top (more structurally sound).
FlocPort_Origin = [[-0.121661; 4.1504; 0.890759]] m
# The Channel Opening was changed in the z-direction so that the bottom opening aligned with the bottom of the tank (for the same reason as the flocports).
ChannelOpening_Origin := [Floc_Origin[0] - L_Sed; Floc_Origin[1] - T_PlantWall; Z_SedChannelBottom] = [-4.30783; 3.5004; 1.44562] m
# "L" origins are for the last channel only
LargeCap_Origin := [
    -CapThickness(1.5 in) + Floc_Origin[0] - L_Sed + X_FlocBaffles[0, 0];
    (Floc_Origin[1] + W_FlocChannel*N_FlocChannels + T_FlocChannelWall*(N_FlocChannels - 1) - 2*S_Fitting);
    {
        (Floc_Origin[2] + L_FlocBaffleLower - 0.5*(L_FlocBaffleLower + L_FlocBaffleUpper - (H_Floc - 0.5*H_PlantFreeboard))) if EN_ModuleIdentical == 0
        (Floc_Origin[2] + 4*S_ModulePipesV + S_FlocBaffle[last(S_FlocBaffle)]*Pi_FlocBaffle - .05 m) otherwise
    }
] = [-4.17062; 4.7204; 0.838761] m
# Shifted LargeCap.Origin and LargeCapL.Origin (y and z values) to within 0.05m of each wall
# Matched L.Origin's to the rest of the Origins to account for now-equivalent FlocModuleBaffle spacings.
LargeCapL_Origin := [
    -CapDiameter(1.5 in)/2 + outerradius(1.5 in) + Floc_Origin[0] - L_Sed + X_FlocBaffles[0, N_FlocChannels - 1] + B_FlocBaffle[0];
    Floc_Origin[1] + W_FlocChannel - 2*S_Fitting;
    Floc_Origin[2] + 4*S_ModulePipesV + S_FlocBaffle[last(S_FlocBaffle)]*Pi_FlocBaffle - .05 m
] = [-3.59597; 4.0604; 1.41503] m
FittedCap_Origin := LargeCap_Origin + [T_FlocBaffle + CapThickness(0.5 in) + CapThickness(1.5 in); 0 m; 0 m]
FittedCapL_Origin := LargeCapL_Origin + [
    T_FlocBaffle + CapDiameter(0.5 in)/2 - outerradius(0.5 in) + CapDiameter(1.5 in)/2 - outerradius(1.5 in);
    0 m;
    0 m
]
LongPipe_Origin := FittedCap_Origin + [L_FlocModuleLong[0]; 0 m; 0 m]
LongPipeL_Origin := FittedCapL_Origin + [L_FlocModuleLong[0]; 0 m; 0 m]
ModuleCoupling_Origin := LongPipe_Origin + [CouplingLength(0.5 in) - 2*SocketDepth(0.5 in); 0 m; 0 m]
ModuleCouplingL_Origin := LongPipeL_Origin + [CouplingLength(0.5 in) - 2*SocketDepth(0.5 in); 0 m; 0 m]
ConnectorPipe_Origin := ModuleCoupling_Origin + [L_FlocModuleConnector[0]; 0 m; 0 m]
ConnectorPipeL_Origin := ModuleCouplingL_Origin + [L_FlocModuleConnector[0]; 0 m; 0 m]
FlocAdapter1_Origin := [
    -L_Sed - CouplingLength(ND_FlocValve) - (max(T_PlantWall - CouplingLength(ND_FlocValve), 0 m) + SocketDepth(ND_FlocValve));
    Y_FlocDrainValves[0];
    Floc_Origin[2]
]
FlocValve_Origin := FlocAdapter1_Origin + [-MaleAdapterLength(ND_FlocValve) + SocketDepth(ND_FlocValve) + ValveSocket(ND_FlocValve); 0 m; 0 m]
FlocAdapter2_Origin := FlocValve_Origin + [
    -ValveLength(ND_FlocValve) + ValveSocket(ND_FlocValve) - MaleAdapterLength(ND_FlocValve) + SocketDepth(ND_FlocValve);
    0 m;
    0 m
]
FlocDrainNipple_Origin := FlocAdapter2_Origin
BaffleSlot1_Origin := [Floc_Origin[0] - L_Sed; -L_Slot; Floc_Origin[2]] + [X_FlocBaffles[0, 0]; Y_FlocBaffles[0, 0]; Z_FlocBaffles[0, 0]]
BaffleSlot1Last_Origin := [Floc_Origin[0] - L_Sed; -L_Slot; Floc_Origin[2]] + [
    X_FlocBaffles[0, N_FlocChannels - 1];
    Y_FlocBaffles[0, N_FlocChannels - 1];
    Z_FlocBaffles[0, N_FlocChannels - 1]
]
BaffleSlot2_Origin := [Floc_Origin[0] - L_Sed; -L_Slot; Floc_Origin[2]] + [X_FlocBaffles[1, 0]; Y_FlocBaffles[0, 0]; Z_FlocBaffles[1, 0]]
BaffleSlot2Last_Origin := [Floc_Origin[0] - L_Sed; -L_Slot; Floc_Origin[2]] + [
    X_FlocBaffles[1, N_FlocChannels - 1];
    Y_FlocBaffles[0, N_FlocChannels - 1];
    Z_FlocBaffles[1, N_FlocChannels - 1]
]
BafflePort1V_Origin := [Floc_Origin[0] - L_Sed - zc; W_FlocChannel - L_BafflePort; Floc_Origin[2]] + [X_FlocBaffles[0, 0]; Y_FlocBaffles[0, 0]; Z_FlocBaffles[0, 0]]
BafflePort1VLast_Origin := [Floc_Origin[0] - zc - L_Sed; W_FlocChannel - L_BafflePort; Floc_Origin[2]] + [
    X_FlocBaffles[N_FlocChannelBaffles[N_FlocChannels - 1] - 1, N_FlocChannels - 1];
    Y_FlocBaffles[0, N_FlocChannels - 1];
    Z_FlocBaffles[1, N_FlocChannels - 1]
]
BafflePort2V_Origin := [Floc_Origin[0] - L_Sed - zc; -L_Slot; Floc_Origin[2]] + [X_FlocBaffles[2, 0]; Y_FlocBaffles[0, 0]; Z_FlocBaffles[2, 0]]
BafflePort2VLast_Origin := [Floc_Origin[0] - zc - L_Sed; -L_Slot; Floc_Origin[2]] + [
    X_FlocBaffles[N_FlocChannelBaffles[N_FlocChannels - 1] - 3, N_FlocChannels - 1];
    Y_FlocBaffles[0, N_FlocChannels - 1];
    Z_FlocBaffles[3, N_FlocChannels - 1]
]
# Origin Points
# Flocculator Concrete | no pipes
FlocTankLayer := layer_new("FlocTankCon", grey)
DrawFlocTank := Tank(Floc_Origin, TotalFloc_Dim, T_PlantWall)
DrawFlocWall := BoxF(Wall_Origin, Wall_Origin + Wall_Dim, [0; 0; 0]*deg)
ArrayFlocWall := ArrayLast(N_FlocChannels - 1, 1, W_FlocChannel + T_FlocChannelWall)
FlocChannelPorts :=
    Local ← FreezeLayer("FlocTankCon")
    for i ∈ 0 .. (N_FlocChannels - 2)
        Local ← stack(Local, BoxF(FlocPort_Origin[0, i], FlocPort_Origin[0, i] + FlocPort_Dim[0, i], [0; 0; 0]*deg))
ChannelOpening := BoxF(ChannelOpening_Origin, ChannelOpening_Origin + ChannelOpening_Dim, [0; 0; 0]*deg)
DrawBaffleSlot1 := BoxF(BaffleSlot1_Origin, BaffleSlot1_Origin + BaffleSlot1_Dim, [0; 0; 0]*deg)
DrawBaffleSlot1Last := BoxF(BaffleSlot1Last_Origin, BaffleSlot1Last_Origin + BaffleSlot1Last_Dim, [0; 0; 0]*deg)
DrawBaffleSlot2 := BoxF(BaffleSlot2_Origin, BaffleSlot2_Origin + BaffleSlot2_Dim, [0; 0; 0]*deg)
DrawBaffleSlot2Last := BoxF(BaffleSlot2Last_Origin, BaffleSlot2Last_Origin + BaffleSlot2Last_Dim, [0; 0; 0]*deg)
ArrayBaffleSlot1 := ArrayMultiple([BaffleSlot1_Origin], N_FlocChannels - 1, ceil(N_FlocChannelBaffles[0]/2), -W_FlocChannel - T_FlocChannelWall, 2*B_FlocBaffle[0])
ArrayBaffleSlot2 := ArrayMultiple([BaffleSlot2_Origin], N_FlocChannels - 1, floor(N_FlocChannelBaffles[0]/2), -W_FlocChannel - T_FlocChannelWall, 2*B_FlocBaffle[0])
ArrayBaffleSlot1Last := ArrayMultiple([BaffleSlot1Last_Origin], 1, ceil(N_FlocChannelBaffles[N_FlocChannels - 1]/2), -W_FlocChannel - T_FlocChannelWall, 2*B_FlocBaffle[N_FlocChannels - 1])
ArrayBaffleSlot2Last := ArrayMultiple([BaffleSlot2Last_Origin], 1, floor(N_FlocChannelBaffles[N_FlocChannels - 1]/2), -W_FlocChannel - T_FlocChannelWall, 2*B_FlocBaffle[N_FlocChannels - 1])
Wedge1 := WedgeF([
    Plant_Origin[0] - L_Sed;
    Y_FlocDrainValves[0] + 0.5*D_FlocValve + FlocDrainSlope_Dim[1];
    Floc_Origin[2] - 0.5*D_FlocValve + FlocDrainSlope_Dim[2]
], [
    Plant_Origin[0] - L_Sed + FlocDrainSlope_Dim[0];
    Y_FlocDrainValves[0] + 0.5*D_FlocValve;
    Floc_Origin[2] - 0.5*D_FlocValve
], [0; 0; 0]*deg)
ArrayWedge := ArrayLast(last(Y_FlocDrainValves) + 1, 1, 2*W_FlocChannel + 2*T_FlocChannelWall)
FlocCoupling_Origin
FlocRMCut := CylinderF(FlocCoupling_Origin, outerradius(ND_RMPipe), T_PlantWall, [270; 0]*deg)
GroupFlocSubtractionPieces := GroupAll("DeleteMe")
SubtractFlocTankPieces := SubtractF(["FlocTankCon"], "DeleteMe")
FlocTankScript :=
    stack(FlocTankLayer, DrawFlocTank, DrawFlocWall, ArrayFlocWall, FlocChannelPorts, ChannelOpening, Wedge1, ArrayWedge, FlocRMCut, GroupFlocSubtractionPieces, SubtractFlocTankPieces) if L_Slot == 0
    stack(FlocTankLayer, DrawFlocTank, DrawFlocWall, ArrayFlocWall, FlocChannelPorts, ChannelOpening, DrawBaffleSlot1, DrawBaffleSlot2, DrawBaffleSlot1Last, DrawBaffleSlot2Last, ArrayBaffleSlot1, ArrayBaffleSlot2, ArrayBaffleSlot1Last, ArrayBaffleSlot2Last, sp, Wedge1, ArrayWedge, FlocRMCut, GroupFlocSubtractionPieces, SubtractFlocTankPieces) otherwise
# Vertical Baffles | no pipes
FlocBaffleLayerV := layer_new("FlocModBaffles", ltpurple)
DrawLowerBaffleV := BoxF([Floc_Origin[0] - L_Sed; -L_Slot; Floc_Origin[2]] + [X_FlocBaffles[0, 0]; Y_FlocBaffles[0, 0]; Z_FlocBaffles[0, 0]], [Floc_Origin[0] - L_Sed; -L_Slot; Floc_Origin[2]] + [X_FlocBaffles[0, 0]; Y_FlocBaffles[0, 0]; Z_FlocBaffles[0, 0]] + [T_FlocBaffle; W_FlocChannel + 2*L_Slot; L_FlocBaffles[0, 0]], [0; 0; 0]*deg)
ArrayLowerBaffleV := ArrayLast(1, ceil(N_FlocChannelBaffles[0]/2), 2*B_FlocBaffle[0])
# Aligned FlocModuleBaffle spacing of last floc channel to the FlocModuleBaffle spacings of the other channels.
DrawUpperBaffleV := BoxF([Floc_Origin[0] - L_Sed; -L_Slot; Floc_Origin[2]] + [X_FlocBaffles[1, 0]; Y_FlocBaffles[0, 0]; Z_FlocBaffles[1, 0]], [Floc_Origin[0] - L_Sed; -L_Slot; Floc_Origin[2]] + [X_FlocBaffles[1, 0]; Y_FlocBaffles[0, 0]; Z_FlocBaffles[1, 0]] + [T_FlocBaffle; W_FlocChannel + 2*L_Slot; L_FlocBaffles[1, 0]], [0; 0; 0]*deg)
ArrayUpperBaffleV := ArrayLast(1, {
    ceil(N_FlocChannelBaffles[0]/2) if Q_Plant ≤ Q_PlantMaxLF
    floor(N_FlocChannelBaffles[0]/2) otherwise
}, 2*B_FlocBaffle[0])
ArrayBafflesChannelV := array_all(N_FlocChannels - 1, 1, -W_FlocChannel - T_FlocChannelWall)
DrawLastLowerBaffleV := BoxF([Floc_Origin[0] - L_Sed; -L_Slot; Floc_Origin[2]] + [
    X_FlocBaffles[N_FlocChannelBaffles[N_FlocChannels - 1] - 1, N_FlocChannels - 1];
    Y_FlocBaffles[0, N_FlocChannels - 1];
    Z_FlocBaffles[1, N_FlocChannels - 1]
], [Floc_Origin[0] - L_Sed; -L_Slot; Floc_Origin[2]] + [
    X_FlocBaffles[N_FlocChannelBaffles[N_FlocChannels - 1] - 1, N_FlocChannels - 1];
    Y_FlocBaffles[0, N_FlocChannels - 1];
    Z_FlocBaffles[1, N_FlocChannels - 1]
] + [-T_FlocBaffle; W_FlocChannel + 2*L_Slot; L_FlocBaffles[1, N_FlocChannels - 1]], [0; 0; 0]*deg)
ArrayLastLowerBaffleV := ArrayLast(1, floor(N_FlocChannelBaffles[last(N_FlocChannelBaffles)]/2), -(2*B_FlocBaffle[0]))
DrawLastUpperBaffleV := BoxF([Floc_Origin[0] - L_Sed; -L_Slot; Floc_Origin[2]] + [
    X_FlocBaffles[N_FlocChannelBaffles[N_FlocChannels - 1] - 2, N_FlocChannels - 1];
    Y_FlocBaffles[0, N_FlocChannels - 1];
    Z_FlocBaffles[0, N_FlocChannels - 1]
], [Floc_Origin[0] - L_Sed; -L_Slot; Floc_Origin[2]] + [
    X_FlocBaffles[N_FlocChannelBaffles[N_FlocChannels - 1] - 2, N_FlocChannels - 1];
    Y_FlocBaffles[0, N_FlocChannels - 1];
    Z_FlocBaffles[0, N_FlocChannels - 1]
] + [-T_FlocBaffle; W_FlocChannel + 2*L_Slot; L_FlocBaffles[0, N_FlocChannels - 1]], [0; 0; 0]*deg)
ArrayLastUpperBaffleV := ArrayLast(1, floor(N_FlocChannelBaffles[last(N_FlocChannelBaffles)]/2), -(2*B_FlocBaffle[0]))
FreezeBafflesV := FreezeLayer("FlocModBaffles")
DrawBafflePort1V := BoxF(BafflePort1V_Origin, BafflePort1V_Origin + Port_Dim, [0; 0; 0]*deg)
DrawBafflePort1VLast := BoxF(BafflePort1VLast_Origin, BafflePort1VLast_Origin + Port_Dim, [0; 0; 0]*deg)
DrawBafflePort2V := BoxF(BafflePort2V_Origin, BafflePort2V_Origin + Port_Dim, [0; 0; 0]*deg)
DrawBafflePort2VLast := BoxF(BafflePort2VLast_Origin, BafflePort2VLast_Origin + Port_Dim, [0; 0; 0]*deg)
ArrayPort1V := ArrayMultiple([BafflePort1V_Origin], N_FlocChannels - 1, ceil(N_FlocChannelBaffles[0]/4), -W_FlocChannel - T_FlocChannelWall, 4*B_FlocBaffle[0])
ArrayPort2V := ArrayMultiple([BafflePort2V_Origin], N_FlocChannels - 1, ceil((N_FlocChannelBaffles[0] - 2)/4), -W_FlocChannel - T_FlocChannelWall, 4*B_FlocBaffle[0])
ArrayPort1VLast := ArrayMultiple([BafflePort1VLast_Origin], 1, ceil(N_FlocChannelBaffles[N_FlocChannels - 1]/4), -W_FlocChannel - T_FlocChannelWall, -(4*B_FlocBaffle[N_FlocChannels - 1]))
ArrayPort2VLast := ArrayMultiple([BafflePort2VLast_Origin], 1, ceil((N_FlocChannelBaffles[N_FlocChannels - 1] - 3)/4), -W_FlocChannel - T_FlocChannelWall, -(4*B_FlocBaffle[N_FlocChannels - 1]))
FlocCouplingBaffleCut := CylinderF(FlocCoupling_Origin, ConRadius(ND_RMPipe), SocketDepth(ND_RMPipe), [90; 0]*deg)
GroupBafflesV := GroupAll("DeleteMe")
SubtractBafflePortsV := SubtractF(["FlocModBaffles"], "DeleteMe")
MirrorBafflesV := MirrorAll([Floc_Origin[0]; Floc_Origin[1]] - [L_Sed/2; 0 m], [Floc_Origin[0]; Floc_Origin[1]] - [L_Sed/2; zc], "y")
FlocTankBaffleScriptV := stack(FlocBaffleLayerV, DrawLowerBaffleV, ArrayLowerBaffleV, DrawUpperBaffleV, ArrayUpperBaffleV, ArrayBafflesChannelV, DrawLastLowerBaffleV, ArrayLastLowerBaffleV, DrawLastUpperBaffleV, ArrayLastUpperBaffleV, FreezeBafflesV, DrawBafflePort1V, DrawBafflePort2V, DrawBafflePort1VLast, DrawBafflePort2VLast, view("t"), ArrayPort1V, ArrayPort2V, ArrayPort1VLast, ArrayPort2VLast, FlocCouplingBaffleCut, GroupBafflesV, SubtractBafflePortsV)
# Module Piping for Beginning Channels (overlapping) | Confusing pipes going on.
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# Modules labeled "1" are for the odd-numbered channels (1st, 3rd, etc) while "Mod2" are those facing the opposite direction in the even-numbered channels.
FlocMod1CapLayer := layer_new("FlocModCapPlu", red)
FlocModLargeCap := CapF(LargeCap_Origin, [0; 0]*deg, ND_FlocModulesLarge)
FlocModFittedCap := CapF(FittedCap_Origin, [180; 0]*deg, ND_FlocModulesMain)
FlocMod1CapFrz := FreezeLayer("FlocModCapPlu")
FlocMod1CouplingLayer := layer_new("FlocModCouplingPlu", green)
FlocModCoupling := CouplingF(ModuleCoupling_Origin, [0; 0]*deg, ND_FlocModulesMain, PS_Modules)
FlocMod1CouplingFrz := FreezeLayer("FlocModCouplingPlu")  # must freeze this layer to ensure it gets grouped
FlocMod1PipeLayer := layer_new("FlocModPipePlu", blue)
FlocModLongPipe := PipeFtrial(LongPipe_Origin, L_FlocModuleLong[0], [0; 0]*deg, ND_FlocModulesMain, PS_Modules)
FlocModConnectorPipe := PipeFtrial(ConnectorPipe_Origin, L_FlocModuleConnector[0], [0; 0]*deg, ND_FlocModulesMain, PS_Modules)
# Where do these long pipes go?
# AT THE BOTTOM of this section. Watch out.
FlocMod1PipeFrz := FreezeLayer("FlocModPipePlu")
FlocMod1SpacerLayer := layer_new("FlocModSpacerPlu", blue)
FlocModSpacerPipe1 := PipeFtrial(FittedCap_Origin + [S_FlocBaffle[0] - CapThickness(ND_FlocModulesMain); 0; 0], S_FlocBaffle[0] - CapHeight(ND_FlocModulesMain), [0; 0]*deg, ND_SpacerPipe, PS_Modules)
FlocModSpacerPipe2 := PipeFtrial(FittedCap_Origin + [2*S_FlocBaffle[0] - CapThickness(ND_FlocModulesMain) + T_FlocBaffle; 0; 0], S_FlocBaffle[0], [0; 0]*deg, ND_SpacerPipe, PS_Modules)
ArrayFlocModSpacer := ArrayLast(1, N_FlocChannelBafflesLong[0] - 2, B_FlocBaffle[0])
# Copy if statement for PMat!
# Strange because the nrow value is only 1. Does this still mean that the spacer must be duplicated?
# IN THIS CASE:
FlocMod1SpacerFrz := FreezeLayer("FlocModSpacerPlu")
FlocMod1Spacer :=
    stack(FlocMod1SpacerLayer, getPipeDraw(FlocModSpacerPipe1), FlocMod1SpacerFrz) if N_FlocChannelBafflesLong[0] == 2
    stack(FlocMod1SpacerLayer, getPipeDraw(FlocModSpacerPipe1), getPipeDraw(FlocModSpacerPipe2), ArrayFlocModSpacer, FlocMod1SpacerFrz) otherwise
N_FlocChannelBafflesLong[0] = 4
# Modification based on IDEAS (see below 4/20) needs to start here:
# Here is yet another case where I have no idea how the Array function works.
# Does it make a copy of the pipes? So confused.
PMatDummy :=
    keep ← getPipeDat(PMat, FlocModSpacerPipe1)
    keep ← getPipeDat(keep, FlocModSpacerPipe2) if N_FlocChannelBafflesLong[0] ≠ 2
    keep ← getPipeDat(keep, FlocModSpacerPipe2) if N_FlocChannelBafflesLong[0] ≠ 2
    return keep
Array_All(nrow, ncol, dist) := concat("-array", sp, "all", sp, sp, "R", sp, stringit_nounits(nrow), sp, stringit_nounits(ncol), sp, stringit(dist))
# This happens again because of the array after the second pipe!
# And only once because nrow = 1.
ThawFlocMod1Components := ThawMultiple(["FlocMod*Plu"])
ArrayFlocModX := array_all(1, N_FlocChannelModulesLong[0], B_FlocBaffle[0]*N_FlocChannelBafflesLong[0])
FrzFlocModComponents := FreezeMultiple(["FlocMod*"])
SelectFlocMod1Spacer := SelectLayer("FlocModSpacerPlu")
FlocModSpacerPipe1Short := PipeFtrial([
    Plant_Origin[0] - X_FlocBaffles[(N_FlocChannelBafflesShort[0] - 2)*(N_FlocChannelBafflesShort[0] > 2), 0] - T_FlocBaffle;
    FittedCap_Origin[1];
    FittedCap_Origin[2]
], S_FlocBaffle[0] - CapHeight(ND_FlocModulesMain), [0; 0]*deg, ND_SpacerPipe, PS_Modules)
FlocModSpacerPipe2Short := PipeFtrial([
    Plant_Origin[0] - X_FlocBaffles[(N_FlocChannelBafflesShort[0] - 3)*(N_FlocChannelBafflesShort[0] > 2), 0] - T_FlocBaffle;
    FittedCap_Origin[1];
    FittedCap_Origin[2]
], S_FlocBaffle[0], [0; 0]*deg, ND_SpacerPipe, PS_Modules)
ArrayFlocModSpacerShort := ArrayLast(1, N_FlocChannelBafflesShort[0] - 2, B_FlocBaffle[0])
FlocShortBaffleSpacers1 :=
    stack(SelectFlocMod1Spacer, getPipeDraw(FlocModSpacerPipe1Short), getPipeDraw(FlocModSpacerPipe2Short)) if N_FlocChannelBafflesShort[0] == 3
    stack(SelectFlocMod1Spacer, getPipeDraw(FlocModSpacerPipe1Short), getPipeDraw(FlocModSpacerPipe2Short), ArrayFlocModSpacerShort) otherwise
PMatDummy :=
    keep ← getPipeDat(PMat, FlocModSpacerPipe1Short)
    keep ← getPipeDat(keep, FlocModSpacerPipe2Short)
    keep ← getPipeDat(keep, FlocModSpacerPipe2Short) if N_FlocChannelBafflesLong[0] ≠ 3
    return keep
# This is just copied from the array- forced PMat growing code above,
# Does it still do all the right things?
# FlocModSpacerFrz
SelectFlocMod1Piping := SelectLayer("FlocModPipePlu")
# IDEAS for this now situation 4/20:
FlocModShortPipe := PipeFtrial([
    Floc_Origin[0] - X_FlocBaffles[0, 0] + SocketDepth(ND_FlocModulesMain);
    LargeCap_Origin[1];
    LargeCap_Origin[2]
], L_FlocModuleShort[0], [0; 0]*deg, ND_FlocModulesMain, PS_Modules)
# NOTE : the pipe matrix contributions may not be incorporated into the plant! Check out the crazy long code below. So name them something else.
# PMattemp1, etc.
# Or thats a bad idea. Just don't add them to the script until the big mess down the line?
# Ugh no that's not good either.
FlocModEndPipe := PipeFtrial([Floc_Origin[0]; LargeCap_Origin[1]; LargeCap_Origin[2]], {
    L_FlocModuleShort[0] if N_FlocChannelBafflesShort[0] < 2
    (X_FlocBaffles[0, 0] - CouplingLength(ND_FlocModulesMain) + SocketDepth(ND_FlocModulesMain)) otherwise
}, [0; 0]*deg, ND_FlocModulesMain, PS_Modules)  # Make data only bits that can be added below if needed. YIKES!
# on 4/23: remember how this looks and incorporate it into the code later.
FlocModRightPipe :=
    getPipeDraw(FlocModEndPipe) if N_FlocChannelBafflesShort[0] < 2
    stack(getPipeDraw(FlocModShortPipe), getPipeDraw(FlocModEndPipe)) otherwise
# Note that FlocModRightPipe is a SCRIPT that is ALREADY STACKED. No more getPipeDrawing it. The Additions to the Pipe Matrix need to be put in later, though, depending whether it is added to the FINAL stack near the bottom!
PMatDummy :=
    PMat ← getPipeDat(PMat, FlocModShortPipe) if N_FlocChannelBafflesShort[0] ≥ 2
    PMat ← getPipeDat(PMat, FlocModEndPipe)
    return PMat  # No messy arrays here!
# FlocModPipeFrz
SelectFlocMod1PipeCap := SelectLayer("FlocModCapPlu")
FlocModLastLargeCap := CapF([
    {
        (Floc_Origin[0] - X_FlocBaffles[N_FlocChannelBafflesShort[0] - 1, 0] - T_FlocBaffle - (CapDiameter(ND_FlocModulesLarge)/2 - outerradius(ND_FlocModulesLarge))) if N_FlocChannelBafflesShort[0] ≥ 1
        (Floc_Origin[0] - X_FlocBaffles[0, 0] - T_FlocBaffle - (CapDiameter(ND_FlocModulesLarge)/2 - outerradius(ND_FlocModulesLarge))) otherwise
    };
    LargeCap_Origin[1];
    LargeCap_Origin[2]
], [0; 0]*deg, ND_FlocModulesLarge)
FlocModLastFittedCap := CapF([
    {
        (Floc_Origin[0] - X_FlocBaffles[N_FlocChannelBafflesShort[0] - 1, 0] + (CapDiameter(ND_FlocModulesMain)/2 - outerradius(ND_FlocModulesMain))) if N_FlocChannelBafflesShort[0] ≥ 1
        (Floc_Origin[0] - X_FlocBaffles[0, 0] + (CapDiameter(ND_FlocModulesMain)/2 - outerradius(ND_FlocModulesMain))) otherwise
    };
    LargeCap_Origin[1];
    LargeCap_Origin[2]
], [180; 0]*deg, ND_FlocModulesMain)
# FlocModCapFrz
# only if the short baffle doesn't have one baffle!!!
SelectFlocMod1Coupling := SelectLayer("FlocModCouplingPlu")
LastFlocModCoupling := CouplingF([
    Floc_Origin[0] - X_FlocBaffles[N_FlocChannelBaffles[0] - 1, 0] + CouplingLength(ND_FlocModulesMain) - SocketDepth(ND_FlocModulesMain);
    ModuleCoupling_Origin[1];
    ModuleCoupling_Origin[2]
], [0; 0]*deg, ND_FlocModulesMain, PS_Modules)
# FlocModCouplingFrz
# ThawFlocModComponents
N_FlocChannels = 2
# KEY for pipes:
# (drag this around to add to it)
#
# FlocModLongPipe  (n)  for all 4 conditions
# FlocModConnectorPipe  (n)  for all 4 conditions
# FlocModSpacerPipe1  (n)
# FlocModSpacerPipe2  (n)
# FlocMod1Spacer  (conbination of previous two)  for all 4 conditions
# stack already modified
# complex addition to Pipe Matrix, dummy in PipeMatrix:
# see above
# includes array
# FlocModSpacerPipe1Short  (n)
# FlocModSpacerPipe2Short  (n)
# FlocShortBaffleSpacers1  (combination of previous two)  For conditions 2 and 4
# stack already modified
# dummy in pipe matrix
# includes array
# FlocModShortPipe  (n)
# FlocModEndPipe  (n)
# FlocModRightPipe  (combination of previous 2)  For all 4 conditions
# stack already modified
# dummy in pipe matrix
ArrayTankModules := array_all(N_FlocChannels - 1, 1, -(W_FlocChannel + T_PlantWall))
MirrorTankModules :=
    Local ← ZoomWindow([-L_Sed - zc; (W_FlocChannel + T_PlantWall)*N_FlocChannels; 0] + Floc_Origin, Floc_Origin + [zc; zc; zc])
    for i ∈ 0 .. max(0, floor((N_FlocChannels - 1)/2) - 1)
        ModuleWindows[i, 0] ← [
            -L_Sed - zc;
            -i*(2*W_FlocChannel + T_PlantWall) + (N_FlocChannels - 1)*(W_FlocChannel + T_FlocChannelWall) - T_FlocChannelWall - W_FlocChannel/2;
            0
        ] + Floc_Origin
        ModuleWindows[i, 1] ← [
            zc;
            -i*(2*W_FlocChannel + T_PlantWall) + (N_FlocChannels - 1)*(W_FlocChannel + T_FlocChannelWall) - T_FlocChannelWall;
            0
        ] + Floc_Origin
    SelectMods ← SelectWindow(ModuleWindows)
    MirrorMods ← MirrorSelection([Floc_Origin[0] - L_Sed/2; Floc_Origin[1]], [Floc_Origin[0] - L_Sed/2; Floc_Origin[1] + zc], "y")
    Local ← stack(Local, SelectMods, MirrorMods)
    Local
# Translate the if statements:
# two variables:
# N.FCBS and N.FC
#
# cond 1: N.FCBS < 2 and N.FC = 2
# cond 2: N.FCBS >= 2 and N.FC = 2
# cond 3: N.FCBS < 2 (and N.FC ~=2)
# cond 4: (N.FCBS >=2 and N.FC ~=2)
#
# via process of elimination
# This means that if 2 and 4 are the same, N.FC is not important
# OH MY GOD so much LONG. Lots of pipes to get out of here... and potentially screw up.
# Done for all | DIFFERENT starting here:
FlocMod1Overlap :=
    stack(FlocMod1CapLayer, FlocModLargeCap, FlocModFittedCap, FlocMod1CapFrz, FlocMod1CouplingLayer, FlocModCoupling, FlocMod1CouplingFrz, FlocMod1PipeLayer, getPipeDraw(FlocModLongPipe), getPipeDraw(FlocModConnectorPipe), FlocMod1PipeFrz, FlocMod1Spacer, ThawFlocMod1Components, ArrayFlocModX, FrzFlocModComponents, SelectFlocMod1Piping, FlocModRightPipe, FlocMod1PipeFrz, SelectFlocMod1PipeCap, FlocModLastLargeCap, FlocModLastFittedCap, FlocMod1CapFrz, ThawFlocMod1Components, FrzFlocModComponents) if N_FlocChannelBafflesShort[0] < 2 and N_FlocChannels == 2
    stack(FlocMod1CapLayer, FlocModLargeCap, FlocModFittedCap, FlocMod1CapFrz, FlocMod1CouplingLayer, FlocModCoupling, FlocMod1CouplingFrz, FlocMod1PipeLayer, getPipeDraw(FlocModLongPipe), getPipeDraw(FlocModConnectorPipe), FlocMod1PipeFrz, FlocMod1Spacer, ThawFlocMod1Components, ArrayFlocModX, FrzFlocModComponents, FlocShortBaffleSpacers1, FlocMod1SpacerFrz, SelectFlocMod1Piping, FlocModRightPipe, FlocMod1PipeFrz, SelectFlocMod1PipeCap, FlocModLastLargeCap, FlocModLastFittedCap, FlocMod1CapFrz, SelectFlocMod1Coupling, LastFlocModCoupling, FlocMod1CouplingFrz, ThawFlocMod1Components, ArrayTankModules, MirrorTankModules, FrzFlocModComponents) if N_FlocChannels == 2 and N_FlocChannelBafflesShort[0] ≥ 2
    stack(FlocMod1CapLayer, FlocModLargeCap, FlocModFittedCap, FlocMod1CapFrz, FlocMod1CouplingLayer, FlocModCoupling, FlocMod1CouplingFrz, FlocMod1PipeLayer, getPipeDraw(FlocModLongPipe), getPipeDraw(FlocModConnectorPipe), FlocMod1PipeFrz, FlocMod1Spacer, ThawFlocMod1Components, ArrayFlocModX, FrzFlocModComponents, SelectFlocMod1Piping, FlocModRightPipe, FlocMod1PipeFrz, SelectFlocMod1PipeCap, FlocModLastLargeCap, FlocModLastFittedCap, FlocMod1CapFrz, ThawFlocMod1Components, ArrayTankModules, MirrorTankModules, FrzFlocModComponents) if N_FlocChannelBafflesShort[0] < 2
    stack(FlocMod1CapLayer, FlocModLargeCap, FlocModFittedCap, FlocMod1CapFrz, FlocMod1CouplingLayer, FlocModCoupling, FlocMod1CouplingFrz, FlocMod1PipeLayer, getPipeDraw(FlocModLongPipe), getPipeDraw(FlocModConnectorPipe), FlocMod1PipeFrz, FlocMod1Spacer, ThawFlocMod1Components, ArrayFlocModX, FrzFlocModComponents, FlocShortBaffleSpacers1, FlocMod1SpacerFrz, SelectFlocMod1Piping, FlocModRightPipe, FlocMod1PipeFrz, SelectFlocMod1PipeCap, FlocModLastLargeCap, FlocModLastFittedCap, FlocMod1CapFrz, SelectFlocMod1Coupling, LastFlocModCoupling, FlocMod1CouplingFrz, ThawFlocMod1Components, ArrayTankModules, MirrorTankModules, FrzFlocModComponents) otherwise
PMat :=
    k ← getPipeDat(PMat, FlocModLongPipe)
    k ← getPipeDat(k, FlocModConnectorPipe)
    k ←
        keep ← getPipeDat(k, FlocModSpacerPipe1)
        keep ← getPipeDat(keep, FlocModSpacerPipe2) if N_FlocChannelBafflesLong[0] ≠ 2
        keep ← getPipeDat(keep, FlocModSpacerPipe2) if N_FlocChannelBafflesLong[0] ≠ 2
    k ←
        k ← getPipeDat(k, FlocModShortPipe) if N_FlocChannelBafflesShort[0] ≥ 2
        keep ← getPipeDat(k, FlocModEndPipe)
    if N_FlocChannelBafflesShort[0] ≥ 2
        k ←
            keep ← getPipeDat(k, FlocModSpacerPipe1Short)
            keep ← getPipeDat(keep, FlocModSpacerPipe2Short)
            keep ← getPipeDat(keep, FlocModSpacerPipe2Short) if N_FlocChannelBafflesLong[0] ≠ 3
    return k
PMat = [
    1.10525, 0.1524, 8, 1;
    0.334, 0.2032, 8, 1;
    0.327, 0.1016, 8, 6;
    0.945249, 0.1016, 8, 1;
    0.943661, 0.2032, 8, 1;
    0.954455, 0.0508, 8, 4;
    0.480786, 0.0254, 2, 7;
    0.428399, 0.0381, 2, 19;
    0.114, 0.1524, 8, 1;
    0.284531, 0.1016, 8, 1
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] m
# something okay on 4/23
# Module Piping for Last Channel (overlapping) | More confusing pipes. Finished ish 4/30/14
LargeCapLast_Origin := [
    Floc_Origin[0] + X_FlocBaffles[N_FlocChannelBaffles[last(N_FlocChannelBaffles)] - 1, cols(X_FlocBaffles) - 1] + CapThickness(ND_FlocModulesLarge) - L_Sed + T_FlocBaffle;
    Floc_Origin[1] - .05 m + W_FlocChannel;
    Floc_Origin[2] + 4*S_ModulePipesV + S_FlocBaffle[last(S_FlocBaffle)]*Pi_FlocBaffle - .05 m
]
FittedCapLast_Origin := [-T_FlocBaffle - CapThickness(ND_FlocModulesLarge) - CapThickness(ND_FlocModulesMain); 0 m; 0 m] + LargeCapLast_Origin
FlocModCouplingLast_Origin := FittedCapLast_Origin + [-L_FlocModuleLong[last(L_FlocModuleLong)]; 0 m; 0 m]
ConnectorPipeLast_Origin := FlocModCouplingLast_Origin + [-CouplingLength(ND_FlocModulesMain) + 2*SocketDepth(ND_FlocModulesMain); 0 m; 0 m]
# FrzFlocModComponents
# SelectFlocModPipeCap
FlocModLargeCapLast := CapF(LargeCapLast_Origin, [180; 0]*deg, ND_FlocModulesLarge)
ArrayFlocModXCap := ArrayLast(1, N_FlocChannelModulesLong[last(N_FlocChannelModulesLong)] + 1*(N_FlocChannelBafflesShort[last(N_FlocChannelBafflesShort)] > 0), -(B_FlocBaffle[last(B_FlocBaffle)]*N_FlocChannelBafflesLong[last(N_FlocChannelBafflesLong)]))
FlocModFittedCapLast := CapF(FittedCapLast_Origin, [0; 0]*deg, ND_FlocModulesMain)
# ArrayFlocModXCap
# FlocModCapFrz
FlocMod1CouplingSelect := SelectLayer("FlocModCouplingPlu")
FlocModCouplingLast := CouplingF(FlocModCouplingLast_Origin, [0; 0]*deg, ND_FlocModulesMain, PS_Modules)
FlocMod1CouplingFrz := FreezeLayer("FlocModCouplingPlu")  # must freeze this layer to ensure it gets grouped
FlocMod1PipeSelect := SelectLayer("FlocModPipePlu")
FlocModLongPipeLast := PipeFtrial(FittedCapLast_Origin, L_FlocModuleLong[last(L_FlocModuleLong)], [0; 0]*deg, ND_FlocModulesMain, PS_Modules)  # It is arrayed!
ArrayFlocModXLast := ArrayLast(1, N_FlocChannelModulesLong[last(N_FlocChannelModulesLong)], -(B_FlocBaffle[last(B_FlocBaffle)]*N_FlocChannelBafflesLong[last(N_FlocChannelBafflesLong)]))
FlocModConnectorPipeLast :=
    if N_FlocChannelModulesLong[last(N_FlocChannelModulesLong)] - 1 < 2
        pipe ← PipeFtrial(ConnectorPipeLast_Origin, S_FlocBaffle[last(S_FlocBaffle)] - CouplingLength(ND_FlocModulesMain) + SocketDepth(ND_FlocModulesMain) - CapThickness(ND_FlocModulesLarge), [0; 0]*deg, ND_FlocModulesMain, PS_Modules)
        getPipeDraw(pipe)
    otherwise
        pipe ← PipeFtrial(ConnectorPipeLast_Origin, S_FlocBaffle[last(S_FlocBaffle)] - CouplingLength(ND_FlocModulesMain) + SocketDepth(ND_FlocModulesMain) - CapThickness(ND_FlocModulesLarge), [0; 0]*deg, ND_FlocModulesMain, PS_Modules)
        stack(getPipeDraw(pipe), ArrayLast(1, N_FlocChannelModulesLong[last(N_FlocChannelModulesLong)] - 1, -(B_FlocBaffle[last(B_FlocBaffle)]*N_FlocChannelBafflesLong[last(N_FlocChannelBafflesLong)])))
# This original code has been modified. LOOK HERE FOR PROBLEMS!
PMat :=
    pipeUsed ← PipeFtrial(ConnectorPipeLast_Origin, S_FlocBaffle[last(S_FlocBaffle)] - CouplingLength(ND_FlocModulesMain) + SocketDepth(ND_FlocModulesMain) - CapThickness(ND_FlocModulesLarge), [0; 0]*deg, ND_FlocModulesMain, PS_Modules)
    k ← getPipeDat(PMat, pipeUsed)
    if N_FlocChannelModulesLong[last(N_FlocChannelModulesLong)] - 1 ≥ 2
        i ← 0
        while i < N_FlocChannelModulesLong[last(N_FlocChannelModulesLong)] - 1
            i ← i + 1
            k ← getPipeDat(k, pipeUsed)
LastFlocModConnectorPipe := PipeFtrial([
    Plant_Origin[0] - L_Sed + X_FlocBaffles[0, N_FlocChannels - 1] - CouplingLength(ND_FlocModulesMain) + SocketDepth(ND_FlocModulesMain);
    ConnectorPipeLast_Origin[1];
    ConnectorPipeLast_Origin[2]
], X_FlocBaffles[0, N_FlocChannels - 1] - CouplingLength(ND_FlocModulesMain) + SocketDepth(ND_FlocModulesMain), [0; 0]*deg, ND_FlocModulesMain, PS_Modules)
# This one is conditional! may be nothing
LastFlocModShortPipe :=
    if N_FlocChannelBafflesShort[last(N_FlocChannelBafflesShort)] ≠ 0
        PipeFtrial([
            (Plant_Origin[0] - X_FlocBaffles[N_FlocChannelBafflesLong[last(N_FlocChannelBafflesLong)]*N_FlocChannelModulesLong[last(N_FlocChannelModulesLong)], N_FlocChannels - 1]) - CapThickness(ND_FlocModulesMain) - T_FlocBaffle;
            ConnectorPipeLast_Origin[1];
            ConnectorPipeLast_Origin[2]
        ], L_FlocModuleShort[last(L_FlocModuleShort)], [0; 0]*deg, ND_FlocModulesMain, PS_Modules)
    "0" otherwise
FlocModEndPipeLast := PipeFtrial([
    Floc_Origin[0] - X_FlocBaffles[N_FlocChannelBaffles[last(N_FlocChannelBaffles)] - 1, N_FlocChannels - 1] - T_FlocBaffle - CouplingLength(ND_FlocModulesMain) + SocketDepth(ND_FlocModulesMain);
    FittedCapLast_Origin[1];
    FittedCapLast_Origin[1]
], L_Sed - X_FlocBaffles[N_FlocChannelBaffles[last(N_FlocChannelBaffles)] - 1, N_FlocChannels - 1] - CouplingLength(ND_FlocModulesMain) + SocketDepth(ND_FlocModulesMain) - T_FlocBaffle, [0; 0]*deg, ND_FlocModulesMain, PS_Modules)
# FlocModPipeFrz
# Check here for drawing errors!
# I have modified the actual pipe!
FlocModSpacerPipeLast :=
    pipe ← PipeFtrial(FittedCapLast_Origin + [CapThickness(ND_FlocModulesMain) - CapHeight(ND_FlocModulesMain); 0; 0], S_FlocBaffle[N_FlocChannels - 1] - CapHeight(ND_FlocModulesMain), [0; 0]*deg, ND_SpacerPipe, PS_Modules)
    Local ← stack(SelectLayer("FlocModSpacerPlu"), getPipeDraw(pipe), ArrayFlocModXLast)
    if N_FlocChannelBafflesLong[N_FlocChannels - 1] > 2
        for i ∈ 0 .. N_FlocChannelBafflesLong[N_FlocChannels - 1] - 3
            pipe ← PipeFtrial(FittedCapLast_Origin - [
                S_FlocBaffle[0] - CapThickness(ND_FlocModulesMain) + T_FlocBaffle + B_FlocBaffle[N_FlocChannels - 1]*i;
                0;
                0
            ], S_FlocBaffle[N_FlocChannels - 1], [0; 0]*deg, ND_SpacerPipe, PS_Modules)
            Local ← stack(Local, getPipeDraw(pipe), ArrayFlocModXLast)
    Local
PMat :=
    pipe1 ← PipeFtrial(FittedCapLast_Origin + [CapThickness(ND_FlocModulesMain) - CapHeight(ND_FlocModulesMain); 0; 0], S_FlocBaffle[N_FlocChannels - 1] - CapHeight(ND_FlocModulesMain), [0; 0]*deg, ND_SpacerPipe, PS_Modules)
    k ← getPipeDat(PMat, pipe1)
    i ← 0
    while i < N_FlocChannelModulesLong[last(N_FlocChannelModulesLong)]
        i ← i + 1
        k ← getPipeDat(k, pipe1)
    for i ∈ 0 .. N_FlocChannelBafflesLong[N_FlocChannels - 1] - 3
        pipe2 ← PipeFtrial(FittedCapLast_Origin - [
            S_FlocBaffle[0] - CapThickness(ND_FlocModulesMain) + T_FlocBaffle + B_FlocBaffle[N_FlocChannels - 1]*i;
            0;
            0
        ], S_FlocBaffle[N_FlocChannels - 1], [0; 0]*deg, ND_SpacerPipe, PS_Modules)
        k ← getPipeDat(k, pipe2)
    k
SelectFlocMod1Spacer := SelectLayer("FlocModSpacerPlu")
FlocModSpacerPipeLastShort1 :=
    if N_FlocChannelBafflesShort[last(N_FlocChannelBafflesShort)] ≠ 0
        PipeFtrial([
            Plant_Origin[0] - X_FlocBaffles[N_FlocChannelBafflesLong[last(N_FlocChannelBafflesLong)]*N_FlocChannelModulesLong[last(N_FlocChannelModulesLong)], N_FlocChannels - 1] - CapHeight(ND_FlocModulesMain) - T_FlocBaffle;
            FittedCapLast_Origin[1];
            FittedCapLast_Origin[2]
        ], S_FlocBaffle[N_FlocChannels - 1] - CapHeight(ND_FlocModulesMain), [0; 0]*deg, ND_SpacerPipe, PS_Modules)
    "0" otherwise
FlocModSpacerPipeLastShort2 :=
    if N_FlocChannelBafflesShort[last(N_FlocChannelBafflesShort)] ≠ 0
        PipeFtrial([
            Plant_Origin[0] - X_FlocBaffles[(N_FlocChannelBafflesShort[last(N_FlocChannelBafflesShort)] ≠ 0)*(N_FlocChannelBafflesLong[last(N_FlocChannelBafflesLong)]*N_FlocChannelModulesLong[last(N_FlocChannelModulesLong)] + 1), N_FlocChannels - 1] - T_FlocBaffle;
            FittedCapLast_Origin[1];
            FittedCapLast_Origin[2]
        ], S_FlocBaffle[N_FlocChannels - 1], [0; 0]*deg, ND_SpacerPipe, PS_Modules)
    "0" otherwise
ArrayModSpacerShortLast := ArrayLast(1, N_FlocChannelBafflesShort[last(N_FlocChannelBafflesShort)] - 2, -B_FlocBaffle[last(B_FlocBaffle)])
FlocModSpacerPipeLastShortEnd := PipeFtrial([
    Plant_Origin[0] - X_FlocBaffles[N_FlocChannelBaffles[last(N_FlocChannelBaffles)] - 1, N_FlocChannels - 1] - T_FlocBaffle;
    FittedCapLast_Origin[1];
    FittedCapLast_Origin[2]
], L_Sed - X_FlocBaffles[N_FlocChannelBaffles[last(N_FlocChannelBaffles)] - 1, N_FlocChannels - 1], [0; 0]*deg, ND_SpacerPipe, PS_Modules)
# SelectFlocModCoupling
# Pipes in this section:
# FlocModLongPipeLast  n
# it is arrayed!
# FlocModConnectorPipeLast  weird, conditional, already added to both (FINE)
# LastFlocModConnectorPipe  n
# LastFlocModShortPipe  0 otherwise
# FlocModEndPipeLast  n
# FlocModSpacerPipeLast  weird, conditional, already added to both
# FlocModSpacerPipeLastShort1  0 otherwise
# FlocModSpacerPipeLastShort2  0 otherwise
# FlocModSpacerPipeLastShortEnd  n
# FlocModSpacerShortLast  check it out! already stacked  1 and 2 from above
FlocModCouplingLastEnd := CouplingF([
    Floc_Origin[0] - X_FlocBaffles[N_FlocChannelBaffles[last(N_FlocChannelBaffles)] - 1, N_FlocChannels - 1] - T_FlocBaffle - SocketDepth(ND_FlocModulesMain);
    FittedCapLast_Origin[1];
    FittedCapLast_Origin[2]
], [0; 0]*deg, ND_FlocModulesMain, PS_Modules)
# FlocModCouplingFrz
FlocModSpacerShortLast :=
    stack(SelectFlocMod1Spacer, getPipeDraw(FlocModSpacerPipeLastShort1), FlocMod1SpacerFrz) if N_FlocChannelBafflesShort[last(N_FlocChannelBafflesShort)] == 2
    stack(SelectFlocMod1Spacer, getPipeDraw(FlocModSpacerPipeLastShort1), getPipeDraw(FlocModSpacerPipeLastShort2), ArrayModSpacerShortLast, FlocMod1SpacerFrz) otherwise
# Another long one!
# Repeat the same process as in the last section!
# already stacked into both. Leave it alone!
# First pipe, same for both cases.
# AHA ! a difference
# This last pipe is in both conditions, AND is aded to the PMatrix above.
array
FlocModLast :=
    stack(SelectFlocMod1PipeCap, FlocModLargeCapLast, ArrayFlocModXCap, FlocModFittedCapLast, ArrayFlocModXCap, FlocMod1CapFrz, FlocMod1CouplingSelect, FlocModCouplingLast, ArrayFlocModXLast, FlocMod1CouplingFrz, FlocMod1PipeSelect, getPipeDraw(FlocModLongPipeLast), ArrayFlocModXLast, FlocModConnectorPipeLast, getPipeDraw(LastFlocModConnectorPipe), FlocMod1PipeFrz, FlocModSpacerPipeLast, FrzFlocModComponents) if N_FlocChannelBafflesShort[last(N_FlocChannelBafflesShort)] == 0
    stack(SelectFlocMod1PipeCap, FlocModLargeCapLast, ArrayFlocModXCap, FlocModFittedCapLast, ArrayFlocModXCap, FlocMod1CapFrz, FlocMod1CouplingSelect, FlocModCouplingLast, ArrayFlocModXLast, FlocMod1CouplingFrz, FlocMod1PipeSelect, getPipeDraw(FlocModLongPipeLast), ArrayFlocModXLast, FlocModConnectorPipeLast, getPipeDraw(LastFlocModShortPipe), getPipeDraw(FlocModEndPipeLast), FlocMod1PipeFrz, SelectFlocMod1Coupling, FlocModCouplingLastEnd, FlocMod1CouplingFrz, FlocModSpacerPipeLast, FrzFlocModComponents) otherwise
# only otherwise
PMat :=
    k ← getPipeDat(PMat, FlocModLongPipeLast)
    i ← 0
    while i < N_FlocChannelModulesLong[last(N_FlocChannelModulesLong)]
        i ← i + 1
        k ← getPipeDat(k, FlocModLongPipeLast)
    k ← getPipeDat(k, LastFlocModConnectorPipe) if N_FlocChannelBafflesShort[last(N_FlocChannelBafflesShort)]
    otherwise
        k ← getPipeDat(k, LastFlocModShortPipe)
        k ← getPipeDat(k, FlocModEndPipeLast)
ThawAllFlocModules := ThawMultiple(["FlocMod*Plu"])
ArrayFlocModY := array_all(2, 1, -W_FlocChannel + 4*S_Fitting)
# ArrayModulesY and ArrayModulesZ array new pipes to within 0.05m of each wall.
ArrayFlocModZ := array_all(3, 1, (-S_ModulePipesV*4 + .1 m)/2)
FlocModulesOverlapping :=
    FlocMod1Overlap if Q_Plant ≤ Q_PlantMaxLF
    stack(FlocMod1Overlap, FlocModLast, ThawAllFlocModules, ArrayFlocModY, view("f"), ArrayFlocModZ, view("t"), FrzFlocModComponents) otherwise
# So, for this bad boy, COPY the entire matrix above IF Q.plant > Q.PlantMaxLF
PMat :=
    if Q_Plant > Q_PlantMaxLF
        i ← 0
        while i < 5
            i ← i + 1
            k ← getPipeDat(PMat, FlocModLongPipeLast)
            i ← 0
            while i < N_FlocChannelModulesLong[last(N_FlocChannelModulesLong)]
                i ← i + 1
                k ← getPipeDat(k, FlocModLongPipeLast)
            k ← getPipeDat(k, LastFlocModConnectorPipe) if N_FlocChannelBafflesShort[last(N_FlocChannelBafflesShort)]
            otherwise
                k ← getPipeDat(k, LastFlocModShortPipe)
                k ← getPipeDat(k, FlocModEndPipeLast)
    PMat otherwise
# Module Piping for Beginning Channels (non-overlapping)
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# FlocMod1CapLayer
FlocModLargeCapUpper := CapF([
    LargeCap_Origin[0] + B_FlocBaffle[0];
    LargeCap_Origin[1];
    Floc_Origin[2] + H_Floc - 0.5*H_PlantFreeboard - S_Fitting - ConRadius(ND_FlocModulesLarge)
], [0; 0]*deg, ND_FlocModulesLarge)
FlocModLargeCapMiddle := CapF(LargeCap_Origin, [0; 0]*deg, ND_FlocModulesLarge)
FlocModLargeCapLower := CapF([
    LargeCap_Origin[0];
    LargeCap_Origin[1];
    Floc_Origin[2] + S_Fitting + L_BafflePort + ConRadius(ND_FlocModulesLarge)
], [0; 0]*deg, ND_FlocModulesLarge)
FlocModFittedCapUpper := CapF([
    FittedCap_Origin[0] + B_FlocBaffle[0];
    FittedCap_Origin[1];
    Floc_Origin[2] + H_Floc - 0.5*H_PlantFreeboard - S_Fitting - ConRadius(ND_FlocModulesLarge)
], [180; 0]*deg, ND_FlocModulesMain)
FlocModFittedCapMiddle := CapF(FittedCap_Origin, [180; 0]*deg, ND_FlocModulesMain)
FlocModFittedCapLower := CapF([
    FittedCap_Origin[0];
    FittedCap_Origin[1];
    Floc_Origin[2] + S_Fitting + L_BafflePort + ConRadius(ND_FlocModulesLarge)
], [180; 0]*deg, ND_FlocModulesMain)
# FlocMod1CapFrz
# FlocMod1CouplingLayer
FlocModCouplingUpper := CouplingF([
    ModuleCoupling_Origin[0];
    ModuleCoupling_Origin[1];
    Floc_Origin[2] + H_Floc - 0.5*H_PlantFreeboard - S_Fitting - ConRadius(ND_FlocModulesLarge)
], [0; 0]*deg, ND_FlocModulesMain, PS_Modules)
FlocModCouplingMiddle := CouplingF(ModuleCoupling_Origin, [0; 0]*deg, ND_FlocModulesMain, PS_Modules)
FlocModCouplingLower := CouplingF([
    ModuleCoupling_Origin[0] - B_FlocBaffle[0];
    ModuleCoupling_Origin[1];
    Floc_Origin[2] + S_Fitting + L_BafflePort + ConRadius(ND_FlocModulesLarge)
], [0; 0]*deg, ND_FlocModulesMain, PS_Modules)
# FlocMod1CouplingFrz | must freeze this layer to ensure it gets grouped
# FlocMod1PipeLayer
# Log of pipes:
# FlocModLongPipeUpper  n
# FlocModLongPipeMiddle  n
# FlocModLongPipeLower  n
FlocModLongPipeUpper := PipeFtrial([
    FittedCap_Origin[0] + L_FlocModuleLongOuter[0] + B_FlocBaffle[0];
    FittedCap_Origin[1];
    Floc_Origin[2] + H_Floc - 0.5*H_PlantFreeboard - S_Fitting - ConRadius(ND_FlocModulesLarge)
], L_FlocModuleLongOuter[0], [0; 0]*deg, ND_FlocModulesMain, PS_Modules)
# APRIL 30th! HERE!!
FlocModLongPipeMiddle := PipeFtrial(LongPipe_Origin, L_FlocModuleLong[0], [0; 0]*deg, ND_FlocModulesMain, PS_Modules)
FlocModLongPipeLower := PipeFtrial([
    FittedCap_Origin[0] + L_FlocModuleLongOuter[0];
    FittedCap_Origin[1];
    Floc_Origin[2] + S_Fitting + L_BafflePort + ConRadius(ND_FlocModulesLarge)
], L_FlocModuleLongOuter[0], [0; 0]*deg, ND_FlocModulesMain, PS_Modules)
# FlocMod1PipeFrz
FlocModConnectPipeLayer := layer_new("FlocModConnectPipePlu", blue)
FlocModConnectorPipeUpper := PipeF([
    ConnectorPipe_Origin[0] + B_FlocBaffle[0];
    ConnectorPipe_Origin[1];
    Floc_Origin[2] + H_Floc - 0.5*H_PlantFreeboard - S_Fitting - ConRadius(ND_FlocModulesLarge)
], L_FlocModuleConnectorOuter[0], [0; 0]*deg, ND_FlocModulesMain, PS_Modules)
FlocModConnectorPipeMiddle := PipeF(ConnectorPipe_Origin, L_FlocModuleConnector[0], [0; 0]*deg, ND_FlocModulesMain, PS_Modules)
FlocModConnectorPipeLower := PipeF([
    ConnectorPipe_Origin[0];
    ConnectorPipe_Origin[1];
    Floc_Origin[2] + S_Fitting + L_BafflePort + ConRadius(ND_FlocModulesLarge)
], L_FlocModuleConnectorOuter[0], [0; 0]*deg, ND_FlocModulesMain, PS_Modules)
FlocModConnectPipeFrz := FreezeLayer("FlocModConnectPipePlu")
FlocMod1SpacerLayer := layer_new("FlocModSpacerPlu", blue)
FlocModSpacerPipe1Middle := PipeF(FittedCap_Origin + [S_FlocBaffle[0] - CapThickness(ND_FlocModulesMain); 0; 0], S_FlocBaffle[0] - CapHeight(ND_FlocModulesMain), [0; 0]*deg, ND_SpacerPipe, PS_Modules)
FlocModSpacerPipe2Middle := PipeF(FittedCap_Origin + [2*S_FlocBaffle[0] - CapThickness(ND_FlocModulesMain) + T_FlocBaffle; 0; 0], S_FlocBaffle[0], [0; 0]*deg, ND_SpacerPipe, PS_Modules)
# ArrayFlocModSpacer
FlocModSpacerUpper1 := PipeF([
    Floc_Origin[0] - L_Sed + X_FlocBaffles[1, 0] + 2*B_FlocBaffle[0];
    FittedCap_Origin[1];
    Floc_Origin[2] + H_Floc - 0.5*H_PlantFreeboard - S_Fitting - ConRadius(ND_FlocModulesLarge)
], 2*S_FlocBaffle[0] - CapHeight(ND_FlocModulesMain) + T_FlocBaffle, [0; 0]*deg, ND_SpacerPipe, PS_Modules)
FlocModSpacerUpper2 := PipeF([
    Floc_Origin[0] - L_Sed + X_FlocBaffles[1, 0] + 4*B_FlocBaffle[0];
    FittedCap_Origin[1];
    Floc_Origin[2] + H_Floc - 0.5*H_PlantFreeboard - S_Fitting - ConRadius(ND_FlocModulesLarge)
], 2*S_FlocBaffle[0] + T_FlocBaffle, [0; 0]*deg, ND_SpacerPipe, PS_Modules)
FlocModSpacerLower1 := PipeF([
    Floc_Origin[0] - L_Sed + X_FlocBaffles[0, 0] + 2*B_FlocBaffle[0];
    FittedCap_Origin[1];
    Floc_Origin[2] + S_Fitting + L_BafflePort + ConRadius(ND_FlocModulesLarge)
], 2*S_FlocBaffle[0] - CapHeight(ND_FlocModulesMain) + T_FlocBaffle, [0; 0]*deg, ND_SpacerPipe, PS_Modules)
FlocModSpacerLower2 := PipeF([
    Floc_Origin[0] - L_Sed + X_FlocBaffles[0, 0] + 4*B_FlocBaffle[0];
    FittedCap_Origin[1];
    Floc_Origin[2] + S_Fitting + L_BafflePort + ConRadius(ND_FlocModulesLarge)
], 2*S_FlocBaffle[0] + T_FlocBaffle, [0; 0]*deg, ND_SpacerPipe, PS_Modules)
ArrayFlocModSpacerOuter := ArrayLast(1, (N_FlocChannelBafflesLong[0] - 2)/2, 2*B_FlocBaffle[0])
# FlocMod1SpacerFrz
FlocMod1SpacerNO :=
    stack(FlocMod1SpacerLayer, FlocModSpacerPipe1Middle, FlocModSpacerPipe2Middle, ArrayFlocModSpacer, FlocModSpacerUpper1, FlocModSpacerLower1, FlocMod1SpacerFrz) if N_FlocChannelBafflesLong[0] == 4
    stack(FlocMod1SpacerLayer, FlocModSpacerPipe1Middle, FlocModSpacerPipe2Middle, ArrayFlocModSpacer, FlocModSpacerUpper1, FlocModSpacerUpper2, FlocModSpacerLower1, FlocModSpacerLower2, FlocMod1SpacerFrz) if N_FlocChannelBafflesLong[0] == 6
    stack(FlocMod1SpacerLayer, FlocModSpacerPipe1Middle, FlocModSpacerPipe2Middle, ArrayFlocModSpacer, FlocModSpacerUpper1, FlocModSpacerUpper2, ArrayFlocModSpacerOuter, FlocModSpacerLower1, FlocModSpacerLower2, ArrayFlocModSpacerOuter, FlocMod1SpacerFrz) otherwise
ThawFlocModPieces := ThawMultiple(["FlocModCapPlu"; "FlocModPipePlu"; "FlocModSpacerPlu"; "FlocModCouplingPlu"])
# ArrayFlocModX
# FrzFlocModComponents
ThawFlocModPieces2 := ThawMultiple(["FlocModConnectPipePlu"])
ArrayFlocModXLess := array_all(1, N_FlocChannelModulesLong[0] - 1, B_FlocBaffle[0]*N_FlocChannelBafflesLong[0])
# FrzFlocModComponents
FlocModThawArray :=
    stack(ThawFlocModPieces, ArrayFlocModX, FrzFlocModComponents) if N_FlocChannelModulesLong[0] == 2
    stack(ThawFlocModPieces, ArrayFlocModX, FrzFlocModComponents, ThawFlocModPieces2, ArrayFlocModXLess, FrzFlocModComponents) otherwise
# SelectFlocMod1Spacer
FlocModSpacerPipe1Short := PipeF([
    Plant_Origin[0] - X_FlocBaffles[(N_FlocChannelBafflesShort[0] - 2)*(N_FlocChannelBafflesShort[0] > 2), 0] - T_FlocBaffle;
    FittedCap_Origin[1];
    FittedCap_Origin[2]
], S_FlocBaffle[0] - CapHeight(ND_FlocModulesMain), [0; 0]*deg, ND_SpacerPipe, PS_Modules)
FlocModSpacerPipe2Short := PipeF([
    Plant_Origin[0] - X_FlocBaffles[(N_FlocChannelBafflesShort[0] - 3)*(N_FlocChannelBafflesShort[0] > 2), 0] - T_FlocBaffle;
    FittedCap_Origin[1];
    FittedCap_Origin[2]
], S_FlocBaffle[0], [0; 0]*deg, ND_SpacerPipe, PS_Modules)
ArrayFlocModSpacerShort := ArrayLast(1, N_FlocChannelBafflesShort[0] - 2, B_FlocBaffle[0])
FlocModSpacerLowerEnd := PipeF([
    Plant_Origin[0] - X_FlocBaffles[(N_FlocChannelBafflesShort[0] - 3)*(N_FlocChannelBafflesShort[0] > 2), 0] - T_FlocBaffle;
    FittedCap_Origin[1];
    Floc_Origin[2] + S_Fitting + L_BafflePort + ConRadius(ND_FlocModulesLarge)
], 2*S_FlocBaffle[0] - CapHeight(ND_FlocModulesMain) + T_FlocBaffle, [0; 0]*deg, ND_SpacerPipe, PS_Modules)
ArrayFlocModSpacerShortLower := ArrayLast(1, floor((N_FlocChannelBafflesShort[0] - 2)/2), B_FlocBaffle[0])
FlocModSpacerUpper := PipeF([
    Plant_Origin[0] - X_FlocBaffles[(N_FlocChannelBafflesShort[0] - 3)*(N_FlocChannelBafflesShort[0] > 2), 0] + S_FlocBaffle[0];
    FittedCap_Origin[1];
    Floc_Origin[2] + H_Floc - 0.5*H_PlantFreeboard - S_Fitting - ConRadius(ND_FlocModulesLarge)
], 2*S_FlocBaffle[0] - CapHeight(ND_FlocModulesMain) + T_FlocBaffle, [0; 0]*deg, ND_SpacerPipe, PS_Modules)
ArrayFlocModSpacerShortUpper := ArrayLast(1, floor((N_FlocChannelBafflesShort[0] - 2)/2) - 1, B_FlocBaffle[0])
FlocShortBaffleSpacers1 :=
    stack(SelectFlocMod1Spacer, FlocModSpacerPipe1Short, FlocModSpacerPipe2Short, FlocModSpacerLowerEnd) if N_FlocChannelBafflesShort[0] == 3
    stack(SelectFlocMod1Spacer, FlocModSpacerPipe1Short, FlocModSpacerPipe2Short, ArrayFlocModSpacerShort, FlocModSpacerLowerEnd, ArrayFlocModSpacerShortLower, FlocModSpacerUpper) if N_FlocChannelBafflesShort[0] == 5
    stack(SelectFlocMod1Spacer, FlocModSpacerPipe1Short, FlocModSpacerPipe2Short, ArrayFlocModSpacerShort, FlocModSpacerLowerEnd, ArrayFlocModSpacerShortLower, FlocModSpacerUpper, ArrayFlocModSpacerShortUpper) otherwise
# FlocModSpacerFrz
SelectFlocMod1Piping := SelectLayer("FlocModPipePlu")
FlocModPipeShortUpper := PipeF([
    Plant_Origin[0] - X_FlocBaffles[1, 0] + SocketDepth(ND_FlocModulesMain);
    FittedCap_Origin[1];
    Floc_Origin[2] + S_Fitting + L_BafflePort + ConRadius(ND_FlocModulesLarge)
], (N_FlocChannelBafflesShort[0] - 3)*(S_FlocBaffle[0] + T_FlocBaffle) - CapThickness(ND_FlocModulesMain) + SocketDepth(ND_FlocModulesMain), [0; 0]*deg, ND_FlocModulesMain, PS_Modules) = ["_cylinder -0.28278,4.7204,0.13204 0.01067 a 0.00522,4.7204,0.13204"; "_cylinder -0.27278,4.7204,0.13204 0.00966 a -0.00478,4.7204,0.13204"; "_zoom w -0.00478,4.69973,0.13204 0.01522,4.74107,0.13204"; "_subtract 0.00522,4.73107,0.13204  -0.00478,4.73006,0.13204 "]
FlocModPipeShortMiddle := PipeF([
    Plant_Origin[0] - X_FlocBaffles[0, 0] + SocketDepth(ND_FlocModulesMain);
    FittedCap_Origin[1];
    FittedCap_Origin[2]
], (N_FlocChannelBafflesShort[0] - 1)*(S_FlocBaffle[0] + T_FlocBaffle) - CapThickness(ND_FlocModulesMain) + SocketDepth(ND_FlocModulesMain), [0; 0]*deg, ND_FlocModulesMain, PS_Modules)
FlocModPipeShortLower := PipeF([
    Plant_Origin[0] - X_FlocBaffles[0, 0] + SocketDepth(ND_FlocModulesMain);
    FittedCap_Origin[1];
    Floc_Origin[2] + S_Fitting + L_BafflePort + ConRadius(ND_FlocModulesLarge)
], (N_FlocChannelBafflesShort[0] - 1)*(S_FlocBaffle[0] + T_FlocBaffle) - CapThickness(ND_FlocModulesMain) + SocketDepth(ND_FlocModulesMain), [0; 0]*deg, ND_FlocModulesMain, PS_Modules)
FlocModEndPipeUpper := PipeF([
    Floc_Origin[0];
    LargeCap_Origin[1];
    Floc_Origin[2] + H_Floc - 0.5*H_PlantFreeboard - S_Fitting - ConRadius(ND_FlocModulesLarge)
], {
    (2*S_FlocBaffle[0] + T_FlocBaffle - CapThickness(ND_FlocModulesMain)) if N_FlocChannelBafflesShort[0] == 3
    (2*S_FlocBaffle[0] + T_FlocBaffle - CouplingLength(ND_FlocModulesMain) + SocketDepth(ND_FlocModulesMain)) otherwise
}, [0; 0]*deg, ND_FlocModulesMain, PS_Modules)
FlocModEndPipeMiddle := PipeF([Floc_Origin[0]; LargeCap_Origin[1]; LargeCap_Origin[2]], {
    (S_FlocBaffle[0] - CapThickness(ND_FlocModulesMain)) if N_FlocChannelBafflesShort[0] == 1
    (S_FlocBaffle[0] - CouplingLength(ND_FlocModulesMain) + SocketDepth(ND_FlocModulesMain)) otherwise
}, [0; 0]*deg, ND_FlocModulesMain, PS_Modules)
FlocModEndPipeLower := PipeF([
    Floc_Origin[0];
    LargeCap_Origin[1];
    Floc_Origin[2] + S_Fitting + L_BafflePort + ConRadius(ND_FlocModulesLarge)
], {
    (S_FlocBaffle[0] - CapThickness(ND_FlocModulesMain)) if N_FlocChannelBafflesShort[0] == 1
    (S_FlocBaffle[0] - CouplingLength(ND_FlocModulesMain) + SocketDepth(ND_FlocModulesMain)) otherwise
}, [0; 0]*deg, ND_FlocModulesMain, PS_Modules)
# FlocModPipeFrz
FlocModShortAndEndPipes :=
    stack(SelectFlocMod1Piping, FlocModEndPipeUpper, FlocModEndPipeMiddle, FlocModEndPipeLower, FlocMod1PipeFrz) if N_FlocChannelBafflesShort[0] == 1
    stack(SelectFlocMod1Piping, FlocModEndPipeUpper, FlocModEndPipeMiddle, FlocModEndPipeLower, FlocModPipeShortMiddle, FlocModPipeShortLower, FlocMod1PipeFrz) if N_FlocChannelBafflesShort[0] == 3
    stack(SelectFlocMod1Piping, FlocModEndPipeUpper, FlocModEndPipeMiddle, FlocModEndPipeLower, FlocModPipeShortUpper, FlocModPipeShortMiddle, FlocModPipeShortLower, FlocMod1PipeFrz) otherwise
SelectFlocMod1PipeCap := SelectLayer("FlocModCapPlu")
FlocModEndLargeCapUpper :=
    if N_FlocChannelBafflesShort[0] > 1
        CapF([
            Floc_Origin[0] - X_FlocBaffles[N_FlocChannelBafflesShort[0] - 2, 0] - T_FlocBaffle - CapThickness(ND_FlocModulesLarge);
            LargeCap_Origin[1];
            Floc_Origin[2] + H_Floc - 0.5*H_PlantFreeboard - S_Fitting - ConRadius(ND_FlocModulesLarge)
        ], [0; 0]*deg, ND_FlocModulesLarge)
    "0" otherwise
FlocModEndLargeCapMiddle :=
    if N_FlocChannelBafflesShort[0] > 0
        CapF([
            Floc_Origin[0] - X_FlocBaffles[N_FlocChannelBafflesShort[0] - 1, 0] - T_FlocBaffle - CapThickness(ND_FlocModulesLarge);
            LargeCap_Origin[1];
            LargeCap_Origin[2]
        ], [0; 0]*deg, ND_FlocModulesLarge)
    "0" otherwise
FlocModEndLargeCapLower :=
    if N_FlocChannelBafflesShort[0] > 0
        CapF([
            Floc_Origin[0] - X_FlocBaffles[N_FlocChannelBafflesShort[0] - 1, 0] - T_FlocBaffle - CapThickness(ND_FlocModulesLarge);
            LargeCap_Origin[1];
            Floc_Origin[2] + S_Fitting + L_BafflePort + ConRadius(ND_FlocModulesLarge)
        ], [0; 0]*deg, ND_FlocModulesLarge)
    "0" otherwise
FlocModEndFittedCapUpper :=
    if N_FlocChannelBafflesShort[0] > 1
        CapF([
            Floc_Origin[0] - X_FlocBaffles[N_FlocChannelBafflesShort[0] - 2, 0] + CapThickness(ND_FlocModulesMain);
            LargeCap_Origin[1];
            Floc_Origin[2] + H_Floc - 0.5*H_PlantFreeboard - S_Fitting - ConRadius(ND_FlocModulesLarge)
        ], [180; 0]*deg, ND_FlocModulesMain)
    "0" otherwise
FlocModEndFittedCapMiddle :=
    if N_FlocChannelBafflesShort[0] > 0
        CapF([
            Floc_Origin[0] - X_FlocBaffles[N_FlocChannelBafflesShort[0] - 1, 0] + CapThickness(ND_FlocModulesMain);
            LargeCap_Origin[1];
            LargeCap_Origin[2]
        ], [180; 0]*deg, ND_FlocModulesMain)
    "0" otherwise
FlocModEndFittedCapLower :=
    if N_FlocChannelBafflesShort[0] > 0
        CapF([
            Floc_Origin[0] - X_FlocBaffles[N_FlocChannelBafflesShort[0] - 1, 0] + CapThickness(ND_FlocModulesMain);
            LargeCap_Origin[1];
            Floc_Origin[2] + S_Fitting + L_BafflePort + ConRadius(ND_FlocModulesLarge)
        ], [180; 0]*deg, ND_FlocModulesMain)
    "0" otherwise
# FlocModCapFrz
FlocModCapsEnd :=
    stack(SelectFlocMod1PipeCap, FlocModEndLargeCapMiddle, FlocModEndLargeCapLower, FlocModEndFittedCapMiddle, FlocModEndFittedCapLower, FlocMod1CapFrz) if N_FlocChannelBafflesShort[0] == 1
    stack(SelectFlocMod1PipeCap, FlocModEndLargeCapUpper, FlocModEndLargeCapMiddle, FlocModEndLargeCapLower, FlocModEndFittedCapUpper, FlocModEndFittedCapMiddle, FlocModEndFittedCapLower, FlocMod1CapFrz) otherwise
# only if the short baffle doesn't have one baffle!!!
# SelectFlocMod1Coupling
EndFlocModCouplingUpper := CouplingF([
    Floc_Origin[0] - X_FlocBaffles[1, 0] + CouplingLength(ND_FlocModulesMain) - SocketDepth(ND_FlocModulesMain);
    ModuleCoupling_Origin[1];
    Floc_Origin[2] + H_Floc - 0.5*H_PlantFreeboard - S_Fitting - ConRadius(ND_FlocModulesLarge)
], [0; 0]*deg, ND_FlocModulesMain, PS_Modules)
EndFlocModCouplingMiddle := CouplingF([
    Floc_Origin[0] - X_FlocBaffles[0, 0] + CouplingLength(ND_FlocModulesMain) - SocketDepth(ND_FlocModulesMain);
    ModuleCoupling_Origin[1];
    ModuleCoupling_Origin[2]
], [0; 0]*deg, ND_FlocModulesMain, PS_Modules)
EndFlocModCouplingLower := CouplingF([
    Floc_Origin[0] - X_FlocBaffles[0, 0] + CouplingLength(ND_FlocModulesMain) - SocketDepth(ND_FlocModulesMain);
    ModuleCoupling_Origin[1];
    Floc_Origin[2] + S_Fitting + L_BafflePort + ConRadius(ND_FlocModulesLarge)
], [0; 0]*deg, ND_FlocModulesMain, PS_Modules)
# FlocMod1CouplingFrz
FlocModCouplingsEnd :=
    stack(SelectFlocMod1Coupling, EndFlocModCouplingMiddle, EndFlocModCouplingLower, FlocMod1CouplingFrz) if N_FlocChannelBafflesShort[0] == 3
    stack(SelectFlocMod1Coupling, EndFlocModCouplingUpper, EndFlocModCouplingMiddle, EndFlocModCouplingLower, FlocMod1CouplingFrz) otherwise
SelectFlocModConnectPipe := SelectLayer("FlocModConnectPipePlu")
FlocModConnectPipeEndUpper := PipeF([
    Floc_Origin[0] - X_FlocBaffles[N_FlocChannelBafflesShort[0], 0] + CouplingLength(ND_FlocModulesMain) - SocketDepth(ND_FlocModulesMain) + L_FlocModuleConnectorOuter[0];
    ModuleCoupling_Origin[1];
    Floc_Origin[2] + H_Floc - 0.5*H_PlantFreeboard - S_Fitting - ConRadius(ND_FlocModulesLarge)
], L_FlocModuleConnectorOuter[0], [0; 0]*deg, ND_FlocModulesMain, PS_Modules)
FlocModConnectPipeEndMiddle := PipeF([
    Floc_Origin[0] - X_FlocBaffles[N_FlocChannelBafflesShort[0], 0] + CouplingLength(ND_FlocModulesMain) - SocketDepth(ND_FlocModulesMain) + L_FlocModuleConnector[0];
    ModuleCoupling_Origin[1];
    ModuleCoupling_Origin[2]
], L_FlocModuleConnector[0], [0; 0]*deg, ND_FlocModulesMain, PS_Modules)
FlocModConnectPipeEndLower := PipeF([
    Floc_Origin[0] - X_FlocBaffles[N_FlocChannelBafflesShort[0] + 1, 0] + CouplingLength(ND_FlocModulesMain) - SocketDepth(ND_FlocModulesMain) + L_FlocModuleConnectorOuter[0];
    ModuleCoupling_Origin[1];
    Floc_Origin[2] + S_Fitting + L_BafflePort + ConRadius(ND_FlocModulesLarge)
], L_FlocModuleConnectorOuter[0], [0; 0]*deg, ND_FlocModulesMain, PS_Modules)
# FlocModConnectPipeFrz
EndFlocModConPipe :=
    stack(SelectFlocModConnectPipe, FlocModConnectPipeEndMiddle, FlocModConnectPipeEndLower, FlocModConnectPipeFrz) if N_FlocChannelBafflesShort[0] == 1
    stack(SelectFlocModConnectPipe, FlocModConnectPipeEndUpper, FlocModConnectPipeEndMiddle, FlocModConnectPipeEndLower, FlocModConnectPipeFrz) otherwise
# ThawFlocModComponents
ArrayTankModules := array_all(N_FlocChannels - 1, 1, -(W_FlocChannel + T_FlocChannelWall))
# MirrorTankModules
FlocMod1NoOverlap :=
    stack(FlocMod1CapLayer, FlocModLargeCapUpper, FlocModLargeCapMiddle, FlocModLargeCapLower, FlocModFittedCapUpper, FlocModFittedCapMiddle, FlocModFittedCapLower, FlocMod1CapFrz, FlocMod1CouplingLayer, FlocModCouplingUpper, FlocModCouplingMiddle, FlocModCouplingLower, FlocMod1CouplingFrz, FlocMod1PipeLayer, FlocModLongPipeUpper, FlocModLongPipeMiddle, FlocModLongPipeLower, FlocMod1PipeFrz, FlocModConnectPipeLayer, FlocModConnectorPipeUpper, FlocModConnectorPipeMiddle, FlocModConnectorPipeLower, FlocModConnectPipeFrz, FlocMod1SpacerNO, FlocModThawArray, FlocModCapsEnd, EndFlocModConPipe, FlocModShortAndEndPipes, ThawFlocMod1Components, ArrayTankModules, MirrorTankModules, FrzFlocModComponents) if N_FlocChannelBafflesShort[0] < 2 and (N_FlocChannels > 2 or (Q_Plant ≤ Q_PlantMaxLF))
    stack(FlocMod1CapLayer, FlocModLargeCapUpper, FlocModLargeCapMiddle, FlocModLargeCapLower, FlocModFittedCapUpper, FlocModFittedCapMiddle, FlocModFittedCapLower, FlocMod1CapFrz, FlocMod1CouplingLayer, FlocModCouplingUpper, FlocModCouplingMiddle, FlocModCouplingLower, FlocMod1CouplingFrz, FlocMod1PipeLayer, FlocModLongPipeUpper, FlocModLongPipeMiddle, FlocModLongPipeLower, FlocMod1PipeFrz, FlocModConnectPipeLayer, FlocModConnectorPipeUpper, FlocModConnectorPipeMiddle, FlocModConnectorPipeLower, FlocModConnectPipeFrz, FlocMod1SpacerNO, FlocModThawArray, FlocShortBaffleSpacers1, FlocMod1SpacerFrz, FlocModCapsEnd, FlocModCouplingsEnd, EndFlocModConPipe, FlocModShortAndEndPipes, ThawFlocMod1Components, ArrayTankModules, MirrorTankModules, FrzFlocModComponents) if N_FlocChannelBafflesShort[0] > 2 and (N_FlocChannels > 2 or (Q_Plant ≤ Q_PlantMaxLF))
    stack(FlocMod1CapLayer, FlocModLargeCapUpper, FlocModLargeCapMiddle, FlocModLargeCapLower, FlocModFittedCapUpper, FlocModFittedCapMiddle, FlocModFittedCapLower, FlocMod1CapFrz, FlocMod1CouplingLayer, FlocModCouplingUpper, FlocModCouplingMiddle, FlocModCouplingLower, FlocMod1CouplingFrz, FlocMod1PipeLayer, FlocModLongPipeUpper, FlocModLongPipeMiddle, FlocModLongPipeLower, FlocMod1PipeFrz, FlocModConnectPipeLayer, FlocModConnectorPipeUpper, FlocModConnectorPipeMiddle, FlocModConnectorPipeLower, FlocModConnectPipeFrz, FlocMod1SpacerNO, FlocModThawArray, FlocModCapsEnd, EndFlocModConPipe, FlocModShortAndEndPipes, ThawFlocMod1Components, ArrayTankModules, MirrorTankModules, FrzFlocModComponents) if N_FlocChannelBafflesShort[0] < 2 and N_FlocChannels == 2 and (Q_Plant > Q_PlantMaxLF)
    stack(FlocMod1CapLayer, FlocModLargeCapUpper, FlocModLargeCapMiddle, FlocModLargeCapLower, FlocModFittedCapUpper, FlocModFittedCapMiddle, FlocModFittedCapLower, FlocMod1CapFrz, FlocMod1CouplingLayer, FlocModCouplingUpper, FlocModCouplingMiddle, FlocModCouplingLower, FlocMod1CouplingFrz, FlocMod1PipeLayer, FlocModLongPipeUpper, FlocModLongPipeMiddle, FlocModLongPipeLower, FlocMod1PipeFrz, FlocModConnectPipeLayer, FlocModConnectorPipeUpper, FlocModConnectorPipeMiddle, FlocModConnectorPipeLower, FlocModConnectPipeFrz, FlocMod1SpacerNO, FlocModThawArray, FlocShortBaffleSpacers1, FlocMod1SpacerFrz, FlocModCapsEnd, FlocModCouplingsEnd, EndFlocModConPipe, FlocModShortAndEndPipes, ThawFlocMod1Components, FrzFlocModComponents) otherwise
# Module Piping for Last Channel (non-overlapping)
# NO for nonoverlapping
LargeCapLastNO_Origin := [
    Floc_Origin[0] + X_FlocBaffles[N_FlocChannelBaffles[last(N_FlocChannelBaffles)] - 1, cols(X_FlocBaffles) - 1] + CapThickness(ND_FlocModulesLarge) - L_Sed;
    Floc_Origin[1] - 2*S_Fitting + W_FlocChannel;
    Floc_Origin[2] + L_FlocBaffleLower - 0.5*(L_FlocBaffleLower + L_FlocBaffleUpper - (H_Floc - 0.5*H_PlantFreeboard))
]
FittedCapLastNO_Origin := [-T_FlocBaffle - CapThickness(ND_FlocModulesLarge) - CapThickness(ND_FlocModulesMain); 0 m; 0 m] + LargeCapLastNO_Origin
FlocModCouplingLastNO_Origin := FittedCapLastNO_Origin + [-L_FlocModuleLong[last(L_FlocModuleLong)]; 0 m; 0 m]
ConnectorPipeLastNO_Origin := FlocModCouplingLastNO_Origin + [-CouplingLength(ND_FlocModulesMain) + 2*SocketDepth(ND_FlocModulesMain); 0 m; 0 m]
# FrzFlocModComponents
# SelectFlocModPipeCap
FlocModLargeCapLastUpper := CapF([
    LargeCapLastNO_Origin[0] - B_FlocBaffle[last(B_FlocBaffle)];
    LargeCapLastNO_Origin[1];
    Floc_Origin[2] + H_Floc - 0.5*H_PlantFreeboard - S_Fitting - ConRadius(ND_FlocModulesLarge)
], [180; 0]*deg, ND_FlocModulesLarge)
FlocModLargeCapLastMiddle := CapF(LargeCapLastNO_Origin, [180; 0]*deg, ND_FlocModulesLarge)
FlocModLargeCapLastLower := CapF([
    LargeCapLastNO_Origin[0];
    LargeCapLastNO_Origin[1];
    Floc_Origin[2] + S_Fitting + L_BafflePort + ConRadius(ND_FlocModulesLarge)
], [180; 0]*deg, ND_FlocModulesLarge)
FlocModFittedCapLastUpper := CapF([
    FittedCapLastNO_Origin[0] - B_FlocBaffle[last(B_FlocBaffle)];
    FittedCapLastNO_Origin[1];
    Floc_Origin[2] + H_Floc - 0.5*H_PlantFreeboard - S_Fitting - ConRadius(ND_FlocModulesLarge)
], [0; 0]*deg, ND_FlocModulesMain)
FlocModFittedCapLastMiddle := CapF(FittedCapLastNO_Origin, [0; 0]*deg, ND_FlocModulesMain)
FlocModFittedCapLastLower := CapF([
    FittedCapLastNO_Origin[0];
    FittedCapLastNO_Origin[1];
    Floc_Origin[2] + S_Fitting + L_BafflePort + ConRadius(ND_FlocModulesLarge)
], [0; 0]*deg, ND_FlocModulesMain)
# array after every time a cap is drawn
ArrayFlocModXCapL := ArrayLast(1, N_FlocChannelModulesLong[last(N_FlocChannelModulesLong)] + 1*(N_FlocChannelBafflesShort[last(N_FlocChannelBafflesShort)] > 0), -(B_FlocBaffle[last(B_FlocBaffle)]*N_FlocChannelBafflesLong[last(N_FlocChannelBafflesLong)]))
# FlocModCapFrz
FlocMod1CouplingSelect := SelectLayer("FlocModCouplingPlu")
FlocModCouplingLastUpper := CouplingF([
    FittedCapLastNO_Origin[0] - L_FlocModuleLongOuter[last(L_FlocModuleLong)] - B_FlocBaffle[last(B_FlocBaffle)];
    FlocModCouplingLastNO_Origin[1];
    Floc_Origin[2] + H_Floc - 0.5*H_PlantFreeboard - S_Fitting - ConRadius(ND_FlocModulesLarge)
], [0; 0]*deg, ND_FlocModulesMain, PS_Modules)
FlocModCouplingLastMiddle := CouplingF(FlocModCouplingLastNO_Origin, [0; 0]*deg, ND_FlocModulesMain, PS_Modules)
FlocModCouplingLastLower := CouplingF([
    FittedCapLastNO_Origin[0] - L_FlocModuleLongOuter[last(L_FlocModuleLong)];
    FlocModCouplingLastNO_Origin[1];
    Floc_Origin[2] + S_Fitting + L_BafflePort + ConRadius(ND_FlocModulesLarge)
], [0; 0]*deg, ND_FlocModulesMain, PS_Modules)
ArrayFlocModXConnectL := ArrayLast(1, N_FlocChannelModulesLong[last(N_FlocChannelModulesLong)] - 1, -(B_FlocBaffle[last(B_FlocBaffle)]*N_FlocChannelBafflesLong[last(N_FlocChannelBafflesLong)]))
ArrayFlocModXLastNO := ArrayLast(1, N_FlocChannelModulesLong[last(N_FlocChannelModulesLong)], -(B_FlocBaffle[last(B_FlocBaffle)]*N_FlocChannelBafflesLong[last(N_FlocChannelBafflesLong)]))
FlocMod1CouplingFrz := FreezeLayer("FlocModCouplingPlu")  # must freeze this layer to ensure it gets grouped
FlocModCouplingsLast := stack(FlocMod1CouplingSelect, FlocModCouplingLastUpper, ArrayFlocModXLastNO, FlocModCouplingLastMiddle, ArrayFlocModXLastNO, FlocModCouplingLastLower, ArrayFlocModXLastNO, FlocMod1CouplingFrz)
FlocMod1PipeSelect := SelectLayer("FlocModPipePlu")
FlocModLongPipeLastUpper := PipeF([
    FittedCapLastNO_Origin[0] - B_FlocBaffle[last(B_FlocBaffle)];
    FittedCapLastNO_Origin[1];
    Floc_Origin[2] + H_Floc - 0.5*H_PlantFreeboard - S_Fitting - ConRadius(ND_FlocModulesLarge)
], L_FlocModuleLongOuter[last(L_FlocModuleLongOuter)], [0; 0]*deg, ND_FlocModulesMain, PS_Modules)
FlocModLongPipeLastMiddle := PipeF(FittedCapLastNO_Origin, L_FlocModuleLong[last(L_FlocModuleLong)], [0; 0]*deg, ND_FlocModulesMain, PS_Modules)
FlocModLongPipeLastLower := PipeF([
    FittedCapLastNO_Origin[0];
    FittedCapLastNO_Origin[1];
    Floc_Origin[2] + S_Fitting + L_BafflePort + ConRadius(ND_FlocModulesLarge)
], L_FlocModuleLongOuter[last(L_FlocModuleLongOuter)], [0; 0]*deg, ND_FlocModulesMain, PS_Modules)
EndFlocModLongPipeLastUpper := PipeF([
    {
        (Floc_Origin[0] - L_Sed + X_FlocBaffles[0, cols(X_FlocBaffles) - 1] - CapThickness(ND_FlocModulesMain) - T_FlocBaffle) if N_FlocChannelBafflesShort[N_FlocChannels - 1] == 2
        (Floc_Origin[0] - L_Sed + X_FlocBaffles[0, cols(X_FlocBaffles) - 1] + SocketDepth(ND_FlocModulesMain) - CouplingLength(ND_FlocModulesMain)) otherwise
    };
    FittedCapLastNO_Origin[1];
    Floc_Origin[2] + H_Floc - 0.5*H_PlantFreeboard - S_Fitting - ConRadius(ND_FlocModulesLarge)
], {
    (X_FlocBaffles[0, cols(X_FlocBaffles) - 1] - CapThickness(ND_FlocModulesMain) - T_FlocBaffle) if N_FlocChannelBafflesShort[N_FlocChannels - 1] == 2
    (X_FlocBaffles[0, cols(X_FlocBaffles) - 1] + SocketDepth(ND_FlocModulesMain) - CouplingLength(ND_FlocModulesMain) - T_FlocBaffle) otherwise
}, [0; 0]*deg, ND_FlocModulesMain, PS_Modules)
EndFlocModLongPipeLastMiddle := PipeF([
    Floc_Origin[0] - L_Sed + X_FlocBaffles[0, cols(X_FlocBaffles) - 1] - T_FlocBaffle + SocketDepth(ND_FlocModulesMain) - CouplingLength(ND_FlocModulesMain);
    FittedCapLastNO_Origin[1];
    FittedCapLastNO_Origin[2]
], X_FlocBaffles[0, cols(X_FlocBaffles) - 1] + SocketDepth(ND_FlocModulesMain) - CouplingLength(ND_FlocModulesMain) - T_FlocBaffle, [0; 0]*deg, ND_FlocModulesMain, PS_Modules)
EndFlocModLongPipeLastLower := PipeF([
    {
        (Floc_Origin[0] - L_Sed + X_FlocBaffles[1, cols(X_FlocBaffles) - 1] - CapThickness(ND_FlocModulesMain) - T_FlocBaffle) if N_FlocChannelBafflesShort[N_FlocChannels - 1] == 2
        (Floc_Origin[0] - L_Sed + X_FlocBaffles[1, cols(X_FlocBaffles) - 1] + SocketDepth(ND_FlocModulesMain) - CouplingLength(ND_FlocModulesMain) - T_FlocBaffle) otherwise
    };
    FittedCapLastNO_Origin[1];
    Floc_Origin[2] + S_Fitting + L_BafflePort + ConRadius(ND_FlocModulesLarge)
], {
    (X_FlocBaffles[1, cols(X_FlocBaffles) - 1] - CapThickness(ND_FlocModulesMain) - T_FlocBaffle) if N_FlocChannelBafflesShort[N_FlocChannels - 1] == 2
    (X_FlocBaffles[1, cols(X_FlocBaffles) - 1] + SocketDepth(ND_FlocModulesMain) - CouplingLength(ND_FlocModulesMain) - T_FlocBaffle) otherwise
}, [0; 0]*deg, ND_FlocModulesMain, PS_Modules)
FlocModLastShortPipeUpper := PipeF([
    {
        (Floc_Origin[0] - L_Sed + X_FlocBaffles[N_FlocChannelBafflesShort[N_FlocChannels - 1] - 2, cols(X_FlocBaffles) - 1] - CapThickness(ND_FlocModulesMain) - T_FlocBaffle) if N_FlocChannelBafflesShort[N_FlocChannels - 1] - 2 ≥ 0
        0 otherwise
    };
    FittedCapLastNO_Origin[1];
    Floc_Origin[2] + H_Floc - 0.5*H_PlantFreeboard - S_Fitting - ConRadius(ND_FlocModulesLarge)
], (N_FlocChannelBafflesShort[N_FlocChannels - 1] - 2)*B_FlocBaffle[last(S_FlocBaffle)] + (SocketDepth(ND_FlocModulesMain) - CapThickness(ND_FlocModulesMain)), [0; 0]*deg, ND_FlocModulesMain, PS_Modules)
FlocModLastShortPipeMiddle := PipeF([
    {
        (Floc_Origin[0] - L_Sed + X_FlocBaffles[N_FlocChannelBafflesShort[N_FlocChannels - 1] - 1, cols(X_FlocBaffles) - 1] - CapThickness(ND_FlocModulesMain) - T_FlocBaffle) if N_FlocChannelBafflesShort[N_FlocChannels - 1] - 1 ≥ 0
        0 otherwise
    };
    FittedCapLastNO_Origin[1];
    FittedCapLastNO_Origin[2]
], (N_FlocChannelBafflesShort[N_FlocChannels - 1] - 1)*B_FlocBaffle[last(S_FlocBaffle)] + SocketDepth(ND_FlocModulesMain) - CapThickness(ND_FlocModulesMain), [0; 0]*deg, ND_FlocModulesMain, PS_Modules)
FlocModLastShortPipeLower := PipeF([
    {
        (Floc_Origin[0] - L_Sed + X_FlocBaffles[N_FlocChannelBafflesShort[N_FlocChannels - 1] - 1, cols(X_FlocBaffles) - 1] - CapThickness(ND_FlocModulesMain) - T_FlocBaffle) if N_FlocChannelBafflesShort[N_FlocChannels - 1] - 1 ≥ 0
        0 otherwise
    };
    FittedCapLastNO_Origin[1];
    Floc_Origin[2] + S_Fitting + L_BafflePort + ConRadius(ND_FlocModulesLarge)
], (N_FlocChannelBafflesShort[N_FlocChannels - 1] - 1)*B_FlocBaffle[last(S_FlocBaffle)] + (SocketDepth(ND_FlocModulesMain) - CapThickness(ND_FlocModulesMain)), [0; 0]*deg, ND_FlocModulesMain, PS_Modules)
# FlocMod1LongPipeFrz
FlocModLastEndPipes :=
    stack(FlocMod1PipeSelect, FlocModLongPipeLastUpper, ArrayFlocModXLastNO, FlocModLongPipeLastMiddle, ArrayFlocModXLastNO, FlocModLongPipeLastLower, ArrayFlocModXLastNO, EndFlocModLongPipeLastUpper, EndFlocModLongPipeLastMiddle, EndFlocModLongPipeLastLower, FlocMod1PipeFrz) if N_FlocChannelBafflesShort[N_FlocChannels - 1] == 0
    stack(FlocMod1PipeSelect, FlocModLongPipeLastUpper, ArrayFlocModXLastNO, FlocModLongPipeLastMiddle, ArrayFlocModXLastNO, FlocModLongPipeLastLower, ArrayFlocModXLastNO, EndFlocModLongPipeLastUpper, EndFlocModLongPipeLastMiddle, EndFlocModLongPipeLastLower, FlocModLastShortPipeMiddle, FlocMod1PipeFrz) if N_FlocChannelBafflesShort[N_FlocChannels - 1] == 2
    stack(FlocMod1PipeSelect, FlocModLongPipeLastUpper, ArrayFlocModXLastNO, FlocModLongPipeLastMiddle, ArrayFlocModXLastNO, FlocModLongPipeLastLower, ArrayFlocModXLastNO, EndFlocModLongPipeLastUpper, EndFlocModLongPipeLastMiddle, EndFlocModLongPipeLastLower, FlocModLastShortPipeUpper, FlocModLastShortPipeMiddle, FlocModLastShortPipeLower, FlocMod1PipeFrz) otherwise
FlocModConnectPipeSelect := SelectLayer("FlocModConnectPipePlu")
FlocModConnectorPipeLastUpper := PipeF([
    ConnectorPipeLastNO_Origin[0];
    ConnectorPipeLastNO_Origin[1];
    Floc_Origin[2] + H_Floc - 0.5*H_PlantFreeboard - S_Fitting - ConRadius(ND_FlocModulesLarge)
], L_FlocModuleConnectorOuter[last(L_FlocModuleConnectorOuter)], [0; 0]*deg, ND_FlocModulesMain, PS_Modules)
FlocModConnectorPipeLastMiddle := PipeF(ConnectorPipeLastNO_Origin, L_FlocModuleConnector[last(L_FlocModuleConnector)], [0; 0]*deg, ND_FlocModulesMain, PS_Modules)
FlocModConnectorPipeLastLower := PipeF([
    ConnectorPipeLastNO_Origin[0] + B_FlocBaffle[last(B_FlocBaffle)];
    ConnectorPipeLastNO_Origin[1];
    Floc_Origin[2] + S_Fitting + L_BafflePort + ConRadius(ND_FlocModulesLarge)
], L_FlocModuleConnectorOuter[last(L_FlocModuleConnectorOuter)], [0; 0]*deg, ND_FlocModulesMain, PS_Modules)
# FlocModConnectPipeFrz
LastFlocModShortPipe :=
    if N_FlocChannelBafflesShort[last(N_FlocChannelBafflesShort)] ≠ 0
        PipeF([
            (Plant_Origin[0] - X_FlocBaffles[N_FlocChannelBafflesLong[last(N_FlocChannelBafflesLong)]*N_FlocChannelModulesLong[last(N_FlocChannelModulesLong)], N_FlocChannels - 1]) - CapThickness(ND_FlocModulesMain) - T_FlocBaffle;
            ConnectorPipeLastNO_Origin[1];
            ConnectorPipeLastNO_Origin[2]
        ], L_FlocModuleShort[last(L_FlocModuleShort)], [0; 0]*deg, ND_FlocModulesMain, PS_Modules)
    "0" otherwise
FlocModEndPipeLast := PipeF([
    Floc_Origin[0] - X_FlocBaffles[N_FlocChannelBaffles[last(N_FlocChannelBaffles)] - 1, N_FlocChannels - 1] - T_FlocBaffle - CouplingLength(ND_FlocModulesMain) + SocketDepth(ND_FlocModulesMain);
    FittedCapLastNO_Origin[1];
    FittedCapLastNO_Origin[1]
], L_Sed - X_FlocBaffles[N_FlocChannelBaffles[last(N_FlocChannelBaffles)] - 1, N_FlocChannels - 1] - CouplingLength(ND_FlocModulesMain) + SocketDepth(ND_FlocModulesMain) - T_FlocBaffle, [0; 0]*deg, ND_FlocModulesMain, PS_Modules)
# FlocModPipeFrz
FlocModSpacerPipeLastMiddle :=
    Local ← stack(SelectLayer("FlocModSpacerPlu"), PipeF([
        CapThickness(ND_FlocModulesMain) - CapHeight(ND_FlocModulesMain) + FittedCapLastNO_Origin[0];
        FittedCapLastNO_Origin[1];
        ConnectorPipeLastNO_Origin[2]
    ], S_FlocBaffle[N_FlocChannels - 1] - CapHeight(ND_FlocModulesMain), [0; 0]*deg, ND_SpacerPipe, PS_Modules), ArrayFlocModXLastNO)
    for i ∈ 0 .. N_FlocChannelBafflesLong[N_FlocChannels - 1] - 3
        Local ← stack(Local, PipeF([
            CapThickness(ND_FlocModulesMain) - B_FlocBaffle[N_FlocChannels - 1]*(i + 1) + FittedCapLastNO_Origin[0];
            FittedCapLastNO_Origin[1];
            ConnectorPipeLastNO_Origin[2]
        ], S_FlocBaffle[N_FlocChannels - 1], [0; 0]*deg, ND_SpacerPipe, PS_Modules), ArrayFlocModXLastNO)
    Local
FlocModSpacerUpperLast :=
    Local ← stack(PipeF([
        Plant_Origin[0] + X_FlocBaffles[N_FlocChannelBaffles[last(N_FlocChannelBaffles)] - 2, N_FlocChannels - 1] - L_Sed - CapHeight(ND_FlocModulesMain) - T_FlocBaffle;
        FittedCapLastNO_Origin[1];
        Floc_Origin[2] + H_Floc - 0.5*H_PlantFreeboard - S_Fitting - ConRadius(ND_FlocModulesLarge)
    ], 2*S_FlocBaffle[0] - CapHeight(ND_FlocModulesMain) + T_FlocBaffle, [0; 0]*deg, ND_SpacerPipe, PS_Modules), ArrayFlocModXLastNO)
    if N_FlocChannelBafflesLong[N_FlocChannels - 1] > 5
        for i ∈ 1 .. N_FlocChannelBafflesLong[N_FlocChannels - 1]/2 - 2
            Local ← stack(Local, PipeF([
                Plant_Origin[0] + X_FlocBaffles[N_FlocChannelBaffles[last(N_FlocChannelBaffles)] - 2, N_FlocChannels - 1] - T_FlocBaffle - L_Sed - 2*B_FlocBaffle[last(B_FlocBaffle)]*i;
                FittedCapLastNO_Origin[1];
                Floc_Origin[2] + H_Floc - 0.5*H_PlantFreeboard - S_Fitting - ConRadius(ND_FlocModulesLarge)
            ], 2*S_FlocBaffle[0] + T_FlocBaffle, [0; 0]*deg, ND_SpacerPipe, PS_Modules), ArrayFlocModXLastNO)
    Local
FlocModSpacerLowerLast :=
    Local ← stack(PipeF([
        Plant_Origin[0] - T_FlocBaffle + X_FlocBaffles[N_FlocChannelBaffles[last(N_FlocChannelBaffles)] - 1, N_FlocChannels - 1] - L_Sed - CapHeight(ND_FlocModulesMain);
        FittedCapLastNO_Origin[1];
        Floc_Origin[2] + S_Fitting + L_BafflePort + ConRadius(ND_FlocModulesLarge)
    ], 2*S_FlocBaffle[0] - CapHeight(ND_FlocModulesMain) + T_FlocBaffle, [0; 0]*deg, ND_SpacerPipe, PS_Modules), ArrayFlocModXLastNO)
    if N_FlocChannelBafflesLong[N_FlocChannels - 1] > 5
        for i ∈ 1 .. N_FlocChannelBafflesLong[N_FlocChannels - 1]/2 - 2
            Local ← stack(Local, PipeF([
                Plant_Origin[0] + X_FlocBaffles[N_FlocChannelBaffles[last(N_FlocChannelBaffles)] - 1, N_FlocChannels - 1] - L_Sed - 2*i*B_FlocBaffle[last(B_FlocBaffle)];
                FittedCapLastNO_Origin[1];
                Floc_Origin[2] + S_Fitting + L_BafflePort + ConRadius(ND_FlocModulesLarge)
            ], 2*S_FlocBaffle[0] + T_FlocBaffle, [0; 0]*deg, ND_SpacerPipe, PS_Modules), ArrayFlocModXLastNO)
    Local
FlocModSpacerPipeLastShortMiddle1 :=
    if N_FlocChannelBafflesShort[last(N_FlocChannelBafflesShort)] ≠ 0
        PipeF([
            Plant_Origin[0] - T_FlocBaffle - L_Sed + X_FlocBaffles[N_FlocChannelBafflesShort[last(N_FlocChannelBafflesShort)] - 1, N_FlocChannels - 1] - CapHeight(ND_FlocModulesMain);
            FittedCapLastNO_Origin[1];
            ConnectorPipeLastNO_Origin[2]
        ], S_FlocBaffle[N_FlocChannels - 1] - CapHeight(ND_FlocModulesMain), [0; 0]*deg, ND_SpacerPipe, PS_Modules)
    "0" otherwise
FlocModSpacerPipeLastShortMiddle2 :=
    if N_FlocChannelBafflesShort[last(N_FlocChannelBafflesShort)] ≥ 2
        PipeF([
            Plant_Origin[0] - T_FlocBaffle - L_Sed + X_FlocBaffles[N_FlocChannelBafflesShort[last(N_FlocChannelBafflesShort)] - 2, N_FlocChannels - 1] - CapHeight(ND_FlocModulesMain);
            FittedCapLastNO_Origin[1];
            ConnectorPipeLastNO_Origin[2]
        ], S_FlocBaffle[N_FlocChannels - 1], [0; 0]*deg, ND_SpacerPipe, PS_Modules)
    "0" otherwise
ArrayModSpacerShortLast := ArrayLast(1, N_FlocChannelBafflesShort[last(N_FlocChannelBafflesShort)] - 2, -B_FlocBaffle[last(B_FlocBaffle)])
FlocModSpacerPipeLastShortUpper1 :=
    if N_FlocChannelBafflesShort[last(N_FlocChannelBafflesShort)] ≥ 2
        PipeF([
            Plant_Origin[0] - T_FlocBaffle - L_Sed + X_FlocBaffles[N_FlocChannelBafflesShort[last(N_FlocChannelBafflesShort)] - 2, N_FlocChannels - 1] - CapHeight(ND_FlocModulesMain);
            FittedCapLastNO_Origin[1];
            ConnectorPipeLastNO_Origin[2]
        ], S_FlocBaffle[N_FlocChannels - 1] - CapHeight(ND_FlocModulesMain), [0; 0]*deg, ND_SpacerPipe, PS_Modules)
    "0" otherwise
FlocModSpacerPipeLastShortUpper2 :=
    if N_FlocChannelBafflesShort[last(N_FlocChannelBafflesShort)] ≥ 3
        PipeF([
            Plant_Origin[0] - T_FlocBaffle - L_Sed + X_FlocBaffles[N_FlocChannelBafflesShort[last(N_FlocChannelBafflesShort)] - 3, N_FlocChannels - 1] - CapHeight(ND_FlocModulesMain);
            FittedCapLastNO_Origin[1];
            ConnectorPipeLastNO_Origin[2]
        ], S_FlocBaffle[N_FlocChannels - 1], [0; 0]*deg, ND_SpacerPipe, PS_Modules)
    "0" otherwise
FlocModSpacerPipeLastShortLower1 :=
    if N_FlocChannelBafflesShort[last(N_FlocChannelBafflesShort)] ≠ 0
        PipeF([
            Plant_Origin[0] - T_FlocBaffle - L_Sed + X_FlocBaffles[N_FlocChannelBafflesShort[last(N_FlocChannelBafflesShort)] - 1, N_FlocChannels - 1] - CapHeight(ND_FlocModulesMain);
            FittedCapLastNO_Origin[1];
            ConnectorPipeLastNO_Origin[2]
        ], S_FlocBaffle[N_FlocChannels - 1] - CapHeight(ND_FlocModulesMain), [0; 0]*deg, ND_SpacerPipe, PS_Modules)
    "0" otherwise
FlocModSpacerPipeLastShortLower2 :=
    if N_FlocChannelBafflesShort[last(N_FlocChannelBafflesShort)] ≥ 2
        PipeF([
            Plant_Origin[0] - T_FlocBaffle - L_Sed + X_FlocBaffles[N_FlocChannelBafflesShort[last(N_FlocChannelBafflesShort)] - 2, N_FlocChannels - 1] - CapHeight(ND_FlocModulesMain);
            FittedCapLastNO_Origin[1];
            ConnectorPipeLastNO_Origin[2]
        ], S_FlocBaffle[N_FlocChannels - 1], [0; 0]*deg, ND_SpacerPipe, PS_Modules)
    "0" otherwise
ArrayModSpacerShortLastOuter := ArrayLast(1, (N_FlocChannelBafflesShort[last(N_FlocChannelBafflesShort)] - 2)/2, -2*B_FlocBaffle[last(B_FlocBaffle)])
FlocMod1SpacerNOLast :=
    stack(FlocModSpacerPipeLastMiddle, FlocModSpacerUpperLast, FlocModSpacerLowerLast, FlocMod1SpacerFrz) if N_FlocChannelBafflesShort[last(N_FlocChannelBafflesShort)] == 0
    stack(FlocModSpacerPipeLastMiddle, FlocModSpacerUpperLast, FlocModSpacerLowerLast, FlocModSpacerPipeLastShortMiddle1, FlocMod1SpacerFrz) if N_FlocChannelBafflesShort[last(N_FlocChannelBafflesShort)] == 2
    stack(FlocModSpacerPipeLastMiddle, FlocModSpacerUpperLast, FlocModSpacerLowerLast, FlocModSpacerPipeLastShortMiddle1, FlocModSpacerPipeLastShortMiddle2, ArrayModSpacerShortLast, FlocMod1SpacerFrz) if N_FlocChannelBafflesShort[last(N_FlocChannelBafflesShort)] == 4
    stack(FlocModSpacerPipeLastMiddle, FlocModSpacerUpperLast, FlocModSpacerLowerLast, FlocModSpacerPipeLastShortMiddle1, FlocModSpacerPipeLastShortMiddle2, ArrayModSpacerShortLast, FlocModSpacerPipeLastShortUpper1, FlocModSpacerPipeLastShortLower1, FlocMod1SpacerFrz) if N_FlocChannelBafflesShort[last(N_FlocChannelBafflesShort)] == 6
    stack(FlocModSpacerPipeLastMiddle, FlocModSpacerUpperLast, FlocModSpacerLowerLast, FlocModSpacerPipeLastShortMiddle1, FlocModSpacerPipeLastShortMiddle2, ArrayModSpacerShortLast, FlocModSpacerPipeLastShortUpper1, ArrayModSpacerShortLastOuter, FlocModSpacerPipeLastShortLower1, ArrayModSpacerShortLastOuter, FlocMod1SpacerFrz) otherwise
# SelectFlocModCoupling
FlocModCouplingLastEndUpper := CouplingF([
    Floc_Origin[0] - L_Sed + X_FlocBaffles[0, N_FlocChannels - 1] - SocketDepth(ND_FlocModulesMain) - T_FlocBaffle;
    FittedCapLastNO_Origin[1];
    Floc_Origin[2] + H_Floc - 0.5*H_PlantFreeboard - S_Fitting - ConRadius(ND_FlocModulesLarge)
], [0; 0]*deg, ND_FlocModulesMain, PS_Modules)
FlocModCouplingLastEndMiddle := CouplingF([
    Floc_Origin[0] - L_Sed + X_FlocBaffles[0, N_FlocChannels - 1] - SocketDepth(ND_FlocModulesMain) - T_FlocBaffle;
    FittedCapLastNO_Origin[1];
    ConnectorPipeLastNO_Origin[2]
], [0; 0]*deg, ND_FlocModulesMain, PS_Modules)
FlocModCouplingLastEndLower := CouplingF([
    Floc_Origin[0] - L_Sed + X_FlocBaffles[1, N_FlocChannels - 1] - SocketDepth(ND_FlocModulesMain) - T_FlocBaffle;
    FittedCapLastNO_Origin[1];
    Floc_Origin[2] + S_Fitting + L_BafflePort + ConRadius(ND_FlocModulesLarge)
], [0; 0]*deg, ND_FlocModulesMain, PS_Modules)
# FlocModCouplingFrz
EndLastModCouplings :=
    stack(SelectFlocMod1Coupling, FlocModCouplingLastEndMiddle, FlocMod1CouplingFrz) if N_FlocChannelBafflesShort[last(N_FlocChannelBafflesShort)] == 2
    stack(SelectFlocMod1Coupling, FlocModCouplingLastEndUpper, FlocModCouplingLastEndMiddle, FlocModCouplingLastEndLower, FlocMod1CouplingFrz) otherwise
FlocModSpacerShortLast :=
    stack(SelectFlocMod1Spacer, FlocModSpacerPipeLastShort1, FlocMod1SpacerFrz) if N_FlocChannelBafflesShort[last(N_FlocChannelBafflesShort)] == 2
    stack(SelectFlocMod1Spacer, FlocModSpacerPipeLastShort1, FlocModSpacerPipeLastShort2, ArrayModSpacerShortLast, FlocMod1SpacerFrz) otherwise
FlocModLastNO :=
    stack(SelectFlocMod1PipeCap, FlocModLargeCapLastUpper, ArrayFlocModXCapL, FlocModLargeCapLastMiddle, ArrayFlocModXCapL, FlocModLargeCapLastLower, ArrayFlocModXCapL, FlocModFittedCapLastUpper, ArrayFlocModXCapL, FlocModFittedCapLastMiddle, ArrayFlocModXCapL, FlocModFittedCapLastLower, ArrayFlocModXCapL, FlocMod1CapFrz, FlocMod1SpacerNOLast, FlocModCouplingsLast, FlocModLastEndPipes, FlocModConnectPipeSelect, FlocModConnectorPipeLastUpper, ArrayFlocModXConnectL, FlocModConnectorPipeLastMiddle, ArrayFlocModXConnectL, FlocModConnectorPipeLastLower, ArrayFlocModXConnectL, FlocModConnectPipeFrz) if N_FlocChannelBafflesShort[last(N_FlocChannelBafflesShort)] == 0
    stack(SelectFlocMod1PipeCap, FlocModLargeCapLastUpper, ArrayFlocModXCapL, FlocModLargeCapLastMiddle, ArrayFlocModXCapL, FlocModLargeCapLastLower, ArrayFlocModXCapL, FlocModFittedCapLastUpper, ArrayFlocModXCapL, FlocModFittedCapLastMiddle, ArrayFlocModXCapL, FlocModFittedCapLastLower, ArrayFlocModXCapL, FlocMod1CapFrz, FlocMod1SpacerNOLast, FlocModCouplingsLast, FlocModLastEndPipes, FlocModConnectPipeSelect, FlocModConnectorPipeLastUpper, ArrayFlocModXLastNO, FlocModConnectorPipeLastMiddle, ArrayFlocModXLastNO, FlocModConnectorPipeLastLower, ArrayFlocModXLastNO, FlocModConnectPipeFrz, EndLastModCouplings) otherwise
ThawAllFlocModules := ThawMultiple(["FlocMod*Plu"])
# ArrayModulesY array new pipes to within 0.05m of each wall.
# ArrayFlocModY
FlocModulesNonOverlapping :=
    FlocMod1NoOverlap if Q_Plant ≤ Q_PlantMaxLF
    stack(FlocMod1NoOverlap, FlocModLastNO, ThawAllFlocModules, ArrayFlocModY, FrzFlocModComponents)
FlocModules :=
    FlocModulesOverlapping if EN_ModuleIdentical == 1
    FlocModulesNonOverlapping otherwise
# Horizontal Baffles
FlocBaffleLayerH := layer_new("FlocModBaffles", ltpurple)
FreezeFlocBafflesH := FreezeLayer("FlocModBaffles")
FlocTankBaffleScriptH :=
    Local ← "null" if EN_FlocHoriz ≠ 1
    otherwise
        Local ← FlocBaffleLayerH
        for i ∈ 0 .. (N_FlocChannels - 1)
            for j ∈ 0 .. 1
                Local ← stack(Local, BoxF([Floc_Origin[0] - L_Sed; -L_Slot; Floc_Origin[2]] + [X_FlocBaffles[j, i]; Y_FlocBaffles[j, i]; Z_FlocBaffles[j, i]], [Floc_Origin[0] - L_Sed; -L_Slot; Floc_Origin[2]] + [X_FlocBaffles[j, i]; Y_FlocBaffles[j, i]; Z_FlocBaffles[j, i]] + [T_FlocBaffle; L_FlocBaffles[j, i]; H_Floc], [0; 0; 0]*deg))
                Local ← stack(Local, ArrayLast(1, N_FlocChannelBaffles[i]/2, 2*B_FlocBaffle[i]))
    Local ← stack(Local, FreezeFlocBafflesH)
    return Local
# Channel Drains
FlocTankDrainCouplingScript :=
    Local ← layer_new("FlocDrainCouplingPlu", green)
    for i ∈ 0 .. last(Y_FlocDrainValves)
        Local ← stack(Local, CouplingSUBF([-L_Sed - SocketDepth(ND_FlocValve); Y_FlocDrainValves[i]; Floc_Origin[2]], [0; 0]*deg, ND_FlocValve, PS_Default, ["FlocTankCon"]))
    return stack(Local, FreezeLayer("FlocDrainCouplingPlu"))
FlocTankDrainPipeScript :=
    Local ← layer_new("FlocDrainPipePlu", blue)
    for i ∈ 0 .. last(Y_FlocDrainValves)
        Local ← stack(Local, PipeSUBF([
            -L_Sed - CouplingLength(ND_FlocValve) + SocketDepth(ND_FlocValve);
            Y_FlocDrainValves[i];
            Floc_Origin[2]
        ], max(T_PlantWall - CouplingLength(ND_FlocValve), 0 m) + 2*SocketDepth(ND_FlocValve), [0; 0]*deg, ND_FlocValve, PS_Default, ["FlocTankCon"]))
    return stack(Local, FreezeLayer("FlocDrainPipePlu"))
FlocDrainAdapterLayer := layer_new("FlocDrainAdapterPlu", blue3)
DrawFlocDrainAdapter1 := MaleAdapterF(FlocAdapter1_Origin, [0; 0]*deg, ND_FlocValve, PS_Default)
FlocTankDrainAdapterScript := stack(FlocDrainAdapterLayer, DrawFlocDrainAdapter1, FreezeLayer("FlocDrainAdapterPlu"))
FlocDrainValveLayer := layer_new("FlocDrainValvePlu", blue3)
InsertFlocDrainValve := insertdwg("https://confluence.cornell.edu/download/attachments/173604905/Floc-Scaled-Gate-Valve-Threaded.dwg", FlocValve_Origin, D_FlocScale, D_FlocScale, 0 deg)
FlocTankDrainValveScript := stack(FlocDrainValveLayer, InsertFlocDrainValve, FreezeLayer("FlocDrainValvePlu"))
# For this script to work, you need to modify the search path in AutoCAD everytime you want to test this on a different computer.  Go to tools->options the under search directory add a new file path.  Browse to find the Final Desgins Folder (or equivalent on a different sevrer).
# Iterates through the values of drain locations and inserts a valve
ThawFlocDrains := ThawMultiple(["FlocDrainAdapterPlu"; "FlocDrainValvePlu"])
ArrayFlocDrains := array_all(ceil(N_FlocChannels/2), 1, 2*(W_FlocChannel + T_FlocChannelWall))
FreezeDrains := FreezeMultiple(["FlocDrainAdapterPlu"; "FlocDrainValvePlu"])
FlocDrainArray := stack(ThawFlocDrains, ArrayFlocDrains, FreezeDrains)
# Rapid Mix Components
FlocRMLayer := layer_new("FlocRMCouplingPlu", green)
DrawFlocRMCoupling := CouplingSUBF(FlocCoupling_Origin, [270; 0]*deg, ND_RMPipe, PS_Default, ["FlocTankCon"])  # FlocModPipeFrz
FreezeFlocRMCoupling := FreezeLayer("FlocRMCouplingPlu")
# Orifice Plate
LayerRMOrificePlate := layer_new("FlocRmOrificePlate", red)
D_RMOrifice := D_PipeED(E_MaxRM, Q_Plant, Pi_VenaContractaOrifice, Pi_JetRound) = 0.1311 m
RMOrificePlate := CylinderF([
    FlocCoupling_Origin[0];
    Floc_Origin[1] + N_FlocChannels*W_FlocChannel + (N_FlocChannels - 1)*T_FlocChannelWall - L_FlocCouplingExt + SocketDepth(ND_RMPipe);
    FlocCoupling_Origin[2]
], outerradius(ND_RMPipe), T_RMOrificePlate, [90; 0; 0]*deg)
FreezeRMOrificePlate := FreezeLayer("FlocRmOrificePlate")
RMOrifice := CylinderF([
    FlocCoupling_Origin[0];
    Floc_Origin[1] + N_FlocChannels*W_FlocChannel + (N_FlocChannels - 1)*T_FlocChannelWall - L_FlocCouplingExt + SocketDepth(ND_RMPipe);
    FlocCoupling_Origin[2]
], D_RMOrifice/2, T_RMOrificePlate, [90; 0; 0]*deg)
SubtractRMOrifice := SubtractF(["FlocRmOrificePlate"], "DeleteMe")
RMOrificePlateScript := stack(LayerRMOrificePlate, RMOrificePlate, FreezeRMOrificePlate, RMOrifice, GroupDelete, SubtractRMOrifice)
FlocRMPlateHolderLayer := layer_new("FlocRmPlateHolder", red)
RMOrificePlateHolderStub := PipeF([
    FlocCoupling_Origin[0];
    Floc_Origin[1] + N_FlocChannels*W_FlocChannel + (N_FlocChannels - 1)*T_FlocChannelWall - L_FlocCouplingExt + SocketDepth(ND_RMPipe) - T_RMOrificePlate;
    FlocCoupling_Origin[2]
], SocketDepth(ND_RMPipe), [90; 0; 0]*deg, ND_RMPipe, PS_Default)
FlocRmPlateHolderFrz := FreezeLayer("FlocRmPlateHolder")
# Orifice Plate Rod
D_RMOrificePlateRod := 3/8*in
OrificePlateRodLayer := layer_new("FlocOrificePlateRod", black)
OrificePlateRod := CylinderF([
    FlocCoupling_Origin[0];
    Floc_Origin[1] + N_FlocChannels*W_FlocChannel + (N_FlocChannels - 1)*T_FlocChannelWall - L_FlocCouplingExt/2;
    FlocCoupling_Origin[2] + ConRadius(ND_RMPipe) + zc
], D_RMOrificePlateRod, OuterDiameterFittingPVC(ND_RMPipe) + 2*zc, [0; 270; 0]*deg)
FreezeOrificePlateRod := FreezeLayer("FlocOrificePlateRod")
SubtractOrificePlateRodCoupling := SubtractF(["FlocRMCouplingPlu"], "DeleteMe")
SubtractOrificePlateRodPipe := SubtractF(["FlocRmPlateHolder"], "DeleteMe")
OrificePlateRodScript := stack(OrificePlateRod, GroupDelete, SubtractOrificePlateRodCoupling, OrificePlateRod, GroupDelete, SubtractOrificePlateRodPipe, OrificePlateRodLayer, OrificePlateRod, FreezeOrificePlateRod)
FlocRMScript := stack(FlocRMLayer, DrawFlocRMCoupling, FreezeFlocRMCoupling, RMOrificePlateScript, FlocRMPlateHolderLayer, RMOrificePlateHolderStub, FlocRmPlateHolderFrz, OrificePlateRodScript)
AC_FlocTank :=
    stack(FlocTankScript, FlocTankBaffleScriptH, FlocTankDrainCouplingScript, FlocTankDrainPipeScript, FlocTankDrainAdapterScript, FlocTankDrainValveScript, FlocRMScript) if EN_FlocHoriz == 1 and N_FlocChannels ≤ 2
    stack(FlocTankScript, FlocTankBaffleScriptH, FlocTankDrainCouplingScript, FlocTankDrainPipeScript, FlocTankDrainAdapterScript, FlocTankDrainValveScript, FlocDrainArray, FlocRMScript) if EN_FlocHoriz == 1 and N_FlocChannels > 2
    stack(FlocTankScript, FlocTankBaffleScriptV, FlocModules, FlocTankDrainCouplingScript, FlocTankDrainPipeScript, FlocTankDrainAdapterScript, FlocTankDrainValveScript, FlocRMScript) if EN_FlocHoriz == 0 and N_FlocChannels ≤ 2
    stack(FlocTankScript, FlocTankBaffleScriptV, FlocModules, FlocTankDrainCouplingScript, FlocTankDrainPipeScript, FlocTankDrainAdapterScript, FlocTankDrainValveScript, FlocDrainArray, FlocRMScript) otherwise
# [component: inputs AC_FlocTank]
