# [reference: MaterialsListSRSFPipes.xmcd]
# Entrance Tank AutoCAD
# Entrance Tank Concrete | no pipes
# Origins and dimensions
Et_Origin0 := [
    Plant_Origin[0] - L_Sed + L_Et - {
        (0 m) if EN_DoubleTrain == 0
        (W_DCWalkway + 3*T_PlantWall + L_LfomChannel) otherwise
    };
    Floc_Origin[1] + {
        (N_FlocChannels*(W_FlocChannel + T_FlocChannelWall)) + W_EtWalkway + 2*T_PlantWall - T_FlocChannelWall if Q_Plant > Q_PlantMaxLF
        L_Floc + T_PlantWall + L_ChannelSlot + W_EtWalkway otherwise
    };
    Z_Et
] = [-2.09788; 6.0004; 1.59164] m
Et_Origin1 := [
    Plant_Origin[0] - L_Sed + L_Et;
    Floc_Origin[1] + (N_FlocChannels*(W_FlocChannel + T_PlantWall)) + W_EtWalkway + T_PlantWall;
    Z_Et
] = [-2.09788; 6.0004; 1.59164] m
Et_Origin :=
    Et_Origin0 if EN_EtGrit == 0
    Et_Origin1 otherwise
Et_Dim := [L_Et; W_Et; H_Et] = [2.9048; 1.23575; 0.8] m
EtHopper_Origin := [
    Et_Origin[0] - S_Fitting - ConRadius(ND_EtDrain) - L_EtHopper/2 - T_EtHopperLedge;
    Et_Origin[1] + W_Et;
    Et_Origin[2]
] = [-2.94948; 7.23615; 1.59164] m
Hopper_FarCorner := [Et_Origin[0] - L_EtHopper - T_EtHopperLedge; Et_Origin[1]; Z_EtHopper] = [-3.44948; 6.0004; 2.09164] m
HopperBack_FarCorner := [
    Et_Origin[0] - {
        (L_EtHopperBack/2) if EN_DoubleTrain == 1
        L_EtHopperBack otherwise
    };
    Et_Origin[1] + L_Et + W_Et;
    Et_Origin[2] + H_EtHopperBack
] = [-2.73203; 10.141; 2.09164] m
HopperFront_FarCorner := [
    Et_Origin[0] - {
        (L_EtHopperFront/2) if EN_DoubleTrain == 1
        L_EtHopperFront otherwise
    };
    Et_Origin[1] + L_Et;
    Et_Origin[2] + H_EtHopperFront
] = [-2.49788; 8.9052; 1.99164] m
EtDC_Origin := Et_Origin + [
    -L_EtDC;
    {
        (.5*L_EtHopperFront) if EN_DoubleTrain == 1
        L_EtHopperFront otherwise
    };
    -T_PlantWall
]
LfomChannel_Origin := [
    Et_Origin[0] - L_Et + W_DCWalkway + 3*T_PlantWall + 2*L_LfomChannel;
    Et_Origin[1] + T_LfomChannelWall;
    Floc_Origin[2]
] = [-2.58308; 6.1504; 0] m
# Hoppers and tank walls
EntTankLayer := layer_new("EtCon", grey)
EtHopper := WedgeF(EtHopper_Origin, Hopper_FarCorner, [0; 0; 0]*deg)
MirrorEtHopper := MirrorLast([EtHopper_Origin[0] + T_EtHopperLedge/2; EtHopper_Origin[1]], [EtHopper_Origin[0] + T_EtHopperLedge/2; EtHopper_Origin[1] + zc], "n")
EtHopperLedge := BoxF(EtHopper_Origin, EtHopper_Origin + [T_EtHopperLedge; -W_Et; H_EtHopper], [0; 0; 0]*deg)
AddHopper :=
    1 if EN_DoubleTrain == 0
    4 otherwise
ArrayEtHoppers := array_all(1, N_EtFullHopper + AddHopper, -L_EtHopper - T_EtHopperLedge)
EtHopperBack := WedgeF(Et_Origin + [0; W_Et; 0], HopperBack_FarCorner, [90; 0; 0]*deg)
EtHopperFront := WedgeF(Et_Origin, HopperFront_FarCorner, [90; 0; 0]*deg)
EntTank := Tank(Et_Origin, Et_Dim, T_PlantWall)
# Drain channel
DrainAngle :=
    (1 %) if EN_DoubleTrain == 0
    (2 %) otherwise
EtDC := DrainChannelF(EtDC_Origin + [0 m; W_EtDC; 0 m], [180; 0; 0]*deg, Q_EtDCMax, W_EtDC, H_EtDC, L_EtDC, DrainAngle, Nu_Water, E_Concrete, 1)
FreezeEntTank := FreezeLayer("EtCon")
# Subtract Cutout for Main Plant Drain Channel
PlantDCCutout := BoxF([
    (Plant_Origin[0] - L_Sed - T_PlantWall - W_PlantDC);
    Et_Origin[1] + .5*L_EtHopperFront;
    Et_Origin[2] - T_PlantWall - H_EtDC - T_ChannelWall - 3*T_ConcreteMin
], [
    Plant_Origin[0] - L_Sed - T_PlantWall;
    Et_Origin[1] + .5*L_EtHopperFront + W_EtDC;
    Et_Origin[2] - T_PlantWall
], [0; 0; 0]*deg)
# Subtract extra Hopper length
HopperSubtraction := BoxF([Et_Origin[0] - Et_Dim[0] - T_PlantWall; Et_Origin[1]; Et_Origin[2]], [Et_Origin[0] - Et_Dim[0] - T_PlantWall - 2*L_EtHopper; Et_Origin[1] + W_Et; Et_Origin[2] + H_Et], [0; 0; 0]*deg)
HopperSkim := BoxF([
    Et_Origin[0] - Et_Dim[0];
    Et_Origin[1];
    Et_Origin[2] + H_Et - (HL_Lfom + H_PlantFreeboard + T_ConcreteMin)
], [Et_Origin[0]; Et_Origin[1] + W_Et; Et_Origin[2] + H_Et], [0; 0; 0]*deg)
# Trash rack slots
TrashRackSlot1 := BoxF(EtHopper_Origin + [T_EtHopperLedge/2 - T_ConcreteMin/2; 2*D_Rebar; H_EtHopper - 2*D_Rebar], EtHopper_Origin + [
    T_EtHopperLedge/2 - T_ConcreteMin/2 - 2*D_Rebar;
    -W_Et - 2*D_Rebar;
    H_EtHopper + H_EtTop + H_PlantFreeboard + zc
], [0; 0; 0]*deg)
TrashRackSlot2 := BoxF(EtHopper_Origin + [T_EtHopperLedge/2 + T_ConcreteMin/2; 2*D_Rebar; H_EtHopper - 2*D_Rebar], EtHopper_Origin + [
    T_EtHopperLedge/2 + T_ConcreteMin/2 + 2*D_Rebar;
    -W_Et - 2*D_Rebar;
    H_EtHopper + H_EtTop + H_PlantFreeboard + zc
], [0; 0; 0]*deg)
SubtractTrashRackSlots := SubtractF(["EtCon"], "DeleteMe")
# No-Grit Features
EtDrainSlope := WedgeF(Et_Origin - [L_Et; 0; 0], Et_Origin + [
    -L_Et + ConRadius(ND_EtFlowControl)/tan(30 deg);
    2*ConRadius(ND_EtFlowControl);
    -ConRadius(ND_EtFlowControl)
], [0; 0; 0]*deg)
FreezeEntTank := FreezeLayer("EtCon")
SubtractEtDrainSlope := SubtractF(["EtCon"], "DeleteMe")
EtBaffleLayer := layer_new("EtBaffle", ltgrey)
EtBaffle := BoxSUBF(Et_Origin + [-S_EtBaffle; -T_ConcreteMin; S_EtBaffleBottom], Et_Origin + [-S_EtBaffle - T_ConcreteMin; W_Et + T_ConcreteMin; H_Et], [0; 0; 0]*deg, ["EtCon"])
EtBaffleFrz := FreezeLayer("EtBaffle")
EtTankScript :=
    stack(EntTankLayer, EntTank, FreezeEntTank, EtDrainSlope, GroupDelete, SubtractEtDrainSlope, EtBaffleLayer, EtBaffle, EtBaffleFrz) if EN_EtGrit == 1
    stack(EntTankLayer, EtHopper, MirrorEtHopper, EtHopperLedge, ArrayEtHoppers, EtHopperBack, EtHopperFront, EntTank, EtDC, Union_All, FreezeEntTank, PlantDCCutout, HopperSkim, TrashRackSlot1, TrashRackSlot2, HopperSubtraction, GroupDelete, SubtractTrashRackSlots) if EN_DoubleTrain == 1 and EN_EtGrit == 0
    stack(EntTankLayer, EtHopper, MirrorEtHopper, EtHopperLedge, ArrayEtHoppers, EtHopperBack, EtHopperFront, EntTank, EtDC, Union_All, FreezeEntTank, TrashRackSlot1, TrashRackSlot2, GroupDelete, SubtractTrashRackSlots) otherwise
# Entrance Tank Concrete Two Inlets | no pipes
# Origins and dimensions
Et_Origin0 := [
    Plant_Origin[0] - L_Sed + L_Et;
    Floc_Origin[1] + {
        (N_FlocChannels*(W_FlocChannel + T_FlocChannelWall)) + W_EtWalkway + 2*T_PlantWall - T_FlocChannelWall if Q_Plant > Q_PlantMaxLF
        L_Floc + T_PlantWall + L_ChannelSlot + W_EtWalkway otherwise
    };
    Z_Et
] = [-2.09788; 6.0004; 1.59164] m
Et_Origin1 := [
    Plant_Origin[0] - L_Sed + L_Et;
    Floc_Origin[1] + (N_FlocChannels*(W_FlocChannel + T_PlantWall)) + W_EtWalkway + T_PlantWall;
    Z_Et
] = [-2.09788; 6.0004; 1.59164] m
Et_Origin :=
    Et_Origin0 if EN_EtGrit == 0
    Et_Origin1 otherwise
Et_Dim := [L_Et; W_Et; H_Et] = [2.9048; 1.23575; 0.8] m
EtHopper_Origin := [
    Et_Origin[0] - S_Fitting - ConRadius(ND_EtDrain) - L_EtHopper/2 - T_EtHopperLedge;
    Et_Origin[1] + W_Et;
    Et_Origin[2]
] = [-2.94948; 7.23615; 1.59164] m
Hopper_FarCorner := [Et_Origin[0] - L_EtHopper - T_EtHopperLedge; Et_Origin[1]; Z_EtHopper] = [-3.44948; 6.0004; 2.09164] m
# Use two inlet back far corner for first hopper and original for last two hoppers
HopperBack_FarCorner := [Et_Origin[0] - L_EtHopperBack; Et_Origin[1] + L_Et + W_Et; Et_Origin[2] + H_EtHopperBack] = [-2.73203; 10.141; 2.09164] m
HopperBack_FarCornerTwoInlet := [
    Et_Origin[0] - L_EtHopperBack + (2*S_Fitting + T_EtRemovableWall + 2*T_EtRemovableWallSupport + 2*ConRadius(ND_EtDrain));
    Et_Origin[1] + L_Et + W_Et;
    Et_Origin[2] + H_EtHopperBack
] = [-2.38043; 10.141; 2.09164] m
HopperFront_FarCorner := [Et_Origin[0] + L_EtHopperFront; Et_Origin[1] + L_Et; Et_Origin[2] + H_EtHopperFront] = [-1.69788; 8.9052; 1.99164] m
EtDC_Origin := Et_Origin + [-L_EtDC; L_EtHopperFront; -T_PlantWall]
EtDividingWall_Origin := Et_Origin + [0 m; (L_EtHopperFront + 2*S_Fitting + 2*ConRadius(ND_EtDrain) + T_EtRemovableWallSupport); 0 m]
EtDividingWallSupportL_Origin := EtDividingWall_Origin + [0 m; (T_EtRemovableWall + T_EtRemovableWallSupport)/2; 0 m]
# Set both origins for support walls on opposite sides of the removable wall
EtDividingWallSupportR_Origin := EtDividingWall_Origin + [0 m; -(T_EtRemovableWall + T_EtRemovableWallSupport)/2; 0 m]
# Hoppers and tank walls
EntTankLayer := layer_new("EtCon", grey)
EtHopper := WedgeF(EtHopper_Origin, Hopper_FarCorner, [0; 0; 0]*deg)
MirrorEtHopper := MirrorLast([EtHopper_Origin[0] + T_EtHopperLedge/2; EtHopper_Origin[1]], [EtHopper_Origin[0] + T_EtHopperLedge/2; EtHopper_Origin[1] + zc], "n")
EtHopperLedge := BoxF(EtHopper_Origin, EtHopper_Origin + [T_EtHopperLedge; -W_Et; H_EtHopper], [0; 0; 0]*deg)
ArrayEtHoppers := array_all(1, N_EtFullHopper + 1, -L_EtHopper - T_EtHopperLedge)
# Have to change this or the hopper back far corner
# Incorporate 2 molds
# Make two wedges
EtHopperBack :=
    WedgeF(Et_Origin + [0; W_Et; 0], HopperBack_FarCornerTwoInlet, [90; 0; 0]*deg) if EN_TwoInlets == 1
    WedgeF(Et_Origin + [0; W_Et; 0], HopperBack_FarCorner, [90; 0; 0]*deg) otherwise
ConRadius(ND_EtDrain) - S_Fitting - T_EtHopperLedge
[Et_Origin[0] - L_EtHopperBack; Et_Origin[1] + L_Et + W_Et; Et_Origin[2] + H_EtHopperBack]
EtHopperBack2 := WedgeF(Et_Origin + [-L_EtHopper/2 - T_EtHopperLedge; W_Et; 0], HopperBack_FarCorner + [-W_Et/2; -L_EtHopper/2; 0 m], [90; 0; 0]*deg)
Et_HopperBack :=
    EtHopperBack if EN_TwoInlets == 1
    EtHopperBack otherwise
EtHopperFront := WedgeF(Et_Origin, HopperFront_FarCorner, [90; 0; 0]*deg)
EntTank := Tank(Et_Origin, Et_Dim, T_PlantWall)
EtDividingWallSupportL := BoxF(EtDividingWallSupportL_Origin, EtDividingWallSupportL_Origin + [
    -L_EtHopper/2 - ConRadius(ND_EtDrain) - S_Fitting;
    T_EtRemovableWallSupport;
    H_EtRemovableWallSupport
], [0; 0; 0]*deg)
EtDividingWallSupportR := BoxF(EtDividingWallSupportR_Origin, EtDividingWallSupportR_Origin + [
    -L_EtHopper/2 - ConRadius(ND_EtDrain) - S_Fitting;
    T_EtRemovableWallSupport;
    H_EtRemovableWallSupport
], [0; 0; 0]*deg)
EtDividingWallSupportWedgeR := WedgeF(EtDividingWallSupportR_Origin + [-L_EtHopper/2 - ConRadius(ND_EtDrain) - S_Fitting; 0 m; H_EtRemovableWallSupport], EtDividingWallSupportR_Origin + [
    -2*ConRadius(ND_EtDrain) - 2*S_Fitting;
    T_EtRemovableWallSupport;
    H_EtHopper + H_EtRemovableWallSupport
], [0; 0; 0]*deg)
EtDividingWallSupportWedgeL := WedgeF(EtDividingWallSupportL_Origin + [-L_EtHopper/2 - ConRadius(ND_EtDrain) - S_Fitting; 0 m; H_EtRemovableWallSupport], EtDividingWallSupportL_Origin + [
    -2*ConRadius(ND_EtDrain) - 2*S_Fitting;
    T_EtRemovableWallSupport;
    H_EtHopper + H_EtRemovableWallSupport
], [0; 0; 0]*deg)
SubtractDividingWallSupport := SubtractF(["EtCon"], "DeleteMe")
EntDividingWallSupport := stack(EtDividingWallSupportL, EtDividingWallSupportR, EtDividingWallSupportWedgeR, EtDividingWallSupportWedgeL)
# Drain channel
EtDC := DrainChannelF(EtDC_Origin + [0 m; W_EtDC; 0 m], [180; 0; 0]*deg, Q_EtDCMax, W_EtDC, H_EtDC, L_EtDC, 1 %, Nu_Water, E_Concrete, 1)
FreezeEntTank := FreezeLayer("EtCon")
# Trash rack slots
TrashRackSlot1 := BoxF(EtHopper_Origin + [T_EtHopperLedge/2 - T_ConcreteMin/2; 2*D_Rebar; H_EtHopper - 2*D_Rebar], EtHopper_Origin + [
    T_EtHopperLedge/2 - T_ConcreteMin/2 - 2*D_Rebar;
    -W_Et - 2*D_Rebar;
    H_EtHopper + H_EtTop + H_PlantFreeboard + zc
], [0; 0; 0]*deg)
TrashRackSlot2 := BoxF(EtHopper_Origin + [T_EtHopperLedge/2 + T_ConcreteMin/2; 2*D_Rebar; H_EtHopper - 2*D_Rebar], EtHopper_Origin + [
    T_EtHopperLedge/2 + T_ConcreteMin/2 + 2*D_Rebar;
    -W_Et - 2*D_Rebar;
    H_EtHopper + H_EtTop + H_PlantFreeboard + zc
], [0; 0; 0]*deg)
SubtractTrashRackSlots := SubtractF(["EtCon"], "DeleteMe")
# Removable Wall
EtRemovableLayer := layer_new("EtRemovWall", ltgrey)
EtDividingWall := BoxF(EtDividingWall_Origin, EtDividingWall_Origin + [-L_EtHopper/2 - ConRadius(ND_EtDrain) - S_Fitting; T_EtRemovableWall; H_Et], [0; 0; 0]*deg)
FreezeEntRemovable := FreezeLayer("EtRemovWall")
DividingWallWedge := WedgeF(EtDividingWall_Origin + [-L_EtHopper/2 - ConRadius(ND_EtDrain) - S_Fitting; 0 m; 0 m], EtDividingWall_Origin + [-2*S_Fitting - 2*ConRadius(ND_EtDrain); T_EtRemovableWall; H_EtHopper], [0; 0; 0]*deg)
SubtractDividingWallWedge := SubtractF(["EtRemovWall"], "DeleteMe")
RemovableWall := stack(EtRemovableLayer, EtDividingWall, FreezeEntRemovable, DividingWallWedge, GroupDelete, SubtractDividingWallWedge, FreezeEntRemovable)
EtTankScript2 := stack(EntTankLayer, EtHopper, MirrorEtHopper, EtHopperLedge, ArrayEtHoppers, EtHopperBack, EtHopperBack2, EtHopperFront, EntTank, EntDividingWallSupport, EtDC, Union_All, FreezeEntTank, RemovableWall, TrashRackSlot1, TrashRackSlot2, GroupDelete, SubtractTrashRackSlots)
# no pipes
ModificationsLayer := layer_new("EtExtensions", grey)
W_DCWalkway + 3*T_PlantWall + L_LfomChannel
LfomChannel2_Origin := [
    LfomChannel_Origin[0] - L_LfomChannel - 2*T_ChannelWall - W_DCWalkway;
    LfomChannel_Origin[1];
    Floc_Origin[2]
] = [-4.36788; 6.1504; 0] m
LfomChannel2_Dim := [L_LfomChannel; W_LfomChannel; H_LfomChannel + Z_LfomChannelBottom]
LfomChannel2 := Tank(LfomChannel2_Origin, LfomChannel2_Dim, T_ChannelWall)
RMChannel2_Origin := LfomChannel2_Origin + [-T_ChannelWall - W_RMChannel; T_ChannelWall; -T_ChannelWall] = [-4.96788; 6.3004; -0.15] m
RMChannel2 := BoxF(RMChannel2_Origin, RMChannel2_Origin + [
    -W_RMChannel - 2*T_ChannelWall;
    L_RMChannel + 2*T_ChannelWall + T_PlantWall;
    H_RMChannel + 2*T_ChannelWall
], [180; 0; 0]*deg)
EndFill := BoxF([
    Et_Origin[0] - L_EtHopper*(N_EtFullHopper + (AddHopper - 2)) - L_EtHopper/2 - T_PlantWall*(N_EtFullHopper + (AddHopper - 2));
    Et_Origin[1] + W_LfomChannel + T_ChannelWall;
    Et_Origin[2]
], [
    Et_Origin[0] - Et_Dim[0];
    Et_Origin[1] + W_Et;
    Et_Origin[2] + H_Et - (HL_Lfom + H_PlantFreeboard + T_ConcreteMin)
], [0; 0; 0]*deg)
FreezeModifications := FreezeLayer("EtExtensions")
LfomChannelSubtraction := BoxF([LfomChannel2_Origin[0] - L_LfomChannel; LfomChannel2_Origin[1]; LfomChannel2_Origin[2]], [LfomChannel2_Origin[0]; LfomChannel2_Origin[1]; LfomChannel2_Origin[2]] + [0 m; W_LfomChannel; (LfomChannel2_Dim[2] - H_Et) + T_PlantWall], [0; 0; 0]*deg)
LfomSheetSubtraction2 := BoxF([
    LfomChannel2_Origin[0] - T_ConcreteMin;
    LfomChannel2_Origin[1] + W_LfomChannel;
    LfomChannel2_Origin[2] + H_LfomChannel - (HL_Lfom + H_PlantFreeboard + T_ConcreteMin)
], [
    LfomChannel2_Origin[0] - L_LfomChannel + T_ConcreteMin;
    LfomChannel2_Origin[1] + W_LfomChannel + T_ChannelWall;
    LfomChannel2_Origin[2] + H_LfomChannel
], [0; 0; 0]*deg)
RMSubtraction2 := BoxF(RMChannel2_Origin + [T_ChannelWall; 0 m; T_ChannelWall], RMChannel2_Origin + [
    -W_RMChannel + T_ChannelWall;
    L_RMChannel + 2*T_ChannelWall + T_PlantWall;
    H_RMChannel + T_ChannelWall
], [180; 0; 0]*deg)
# GroupDelete
ModificationSubtractions := SubtractF(["Etcon"; "EtExtensions"], "DeleteMe")
ModificationScript := stack(ModificationsLayer, LfomChannel2, RMChannel2, EndFill, FreezeModifications, LfomChannelSubtraction, LfomSheetSubtraction2, RMSubtraction2, GroupDelete, ModificationSubtractions)
# Concrete Modifications for Double Train
# Trash Rack | no pipes, just cylinders
TRLayer := layer_new("EtTrashrack", yellow)
HorizCylinder := CylinderF(EtHopper_Origin + [T_EtHopperLedge/2 - T_ConcreteMin/2 - D_Rebar/2; 2*D_Rebar; H_EtHopper - 3/2*D_Rebar], D_Rebar/2, W_Et + 4*D_Rebar, [90; 0]*deg)
ViewRight := view("r")
ArrayHorizCylinder := ArrayLast(N_TRSpacesH + 1, 1, B_EtRebar)
ViewTop := view("t")
VertCylinder :=
    CylinderF(EtHopper_Origin + [T_EtHopperLedge/2 - T_ConcreteMin/2 - 3*D_Rebar/2; 3/2*D_Rebar; H_EtHopper - 2*D_Rebar], D_Rebar/2, (N_TRSpacesH + 1)*B_EtRebar - D_Rebar, [0; 90]*deg) if EN_DoubleTrain == 0
    otherwise
        CylinderF(EtHopper_Origin + [
            T_EtHopperLedge/2 - T_ConcreteMin/2 - 3*D_Rebar/2;
            3/2*D_Rebar;
            H_EtHopper - 2*D_Rebar - (H_EtHopper - (H_Et - (HL_Lfom + H_PlantFreeboard + T_ConcreteMin)))
        ], D_Rebar/2, HL_Lfom + H_PlantFreeboard + T_ConcreteMin - zc, [0; 90]*deg)
ArrayVertCyl := ArrayLast(1, N_TRSpacesV + 1, -B_EtRebar)
ArrayAll := array_all(1, 2, T_ConcreteMin + 2*D_Rebar)
Freeze := FreezeLayer("EtTrashrack")
EtTrashRackScript := stack(TRLayer, HorizCylinder, ViewRight, ArrayHorizCylinder, ViewTop, VertCylinder, ViewRight, ArrayVertCyl, ViewTop, ArrayAll, Freeze)
# Rapid Mix Pipe, LFOM, and Orifice Plate | three simple pipes
# this is the upper elbow (connected to the LFOM)
RMElbow_Origin0 := [
    Plant_Origin[0] - L_Sed + S_Fitting + ConRadius(ND_RMPipe);
    Et_Origin[1] + W_Et - S_Fitting - ConRadius(ND_RMPipe) - ElbowRadius(ND_RMPipe);
    FlocCoupling_Origin[2]
]
RMElbow_Origin1 := [
    Plant_Origin[0] - L_Sed + S_Fitting + ConRadius(ND_RMPipe);
    Et_Origin[1] + W_Et - 2*S_Fitting - ConRadius(ND_RMPipe) - ElbowRadius(ND_RMPipe) - 2*ConRadius(ND_EtOverflowDrain);
    FlocCoupling_Origin[2]
]
RMElbow_Origin :=
    RMElbow_Origin0 if EN_EtGrit == 0
    RMElbow_Origin1 otherwise
    = [-4.83441; 6.76308; 0.159537] m
RMAirRelease_Origin := [
    RMElbow_Origin[0];
    Floc_Origin[1] + (N_FlocChannels*(W_FlocChannel + T_FlocChannelWall)) + T_PlantWall - T_FlocChannelWall + S_Fitting;
    FlocCoupling_Origin[2] + innerdiameter(ND_RMPipe, PS_Default)/2 - zc
]
L_RMPipeHoriz := (Et_Origin[1] + W_Et - S_Fitting - ConRadius(ND_RMPipe) - ElbowRadius(ND_RMPipe)) - (Floc_Origin[1] + N_FlocChannels*W_FlocChannel + (N_FlocChannels - 1)*T_FlocChannelWall - L_FlocCouplingExt + CouplingLength(ND_RMPipe) - SocketDepth(ND_RMPipe)) = 1.96713 m
L_RMPipeVert := Z_EtTop - (RMElbow_Origin[2] + ElbowRadius(ND_RMPipe)) = 1.9273 m
L_RMAirRelease := Floc_Origin[2] + H_Floc - (FlocCoupling_Origin[2] + innerdiameter(ND_RMPipe, PS_Default)/2 - zc)
# RM Elbow
RMElbowLayer := layer_new("EtRmElbowPlu", green)
RMElbow := ElbowSUBF(RMElbow_Origin, [0; 90; 0]*deg, ND_RMPipe, PS_Default, ["EtCon"])
FreezeRMElbow := FreezeLayer("EtRmElbowPlu")
# RM Pipes
RMPipeLayer := layer_new("EtRmPipePlu", blue)
# THE FIRST PIPE!
RMVertPipe := PipeSUBFtrial([
    RMElbow_Origin[0];
    RMElbow_Origin[1] + ElbowRadius(ND_RMPipe);
    RMElbow_Origin[2] + ElbowRadius(ND_RMPipe)
], L_RMPipeVert, [0; 90; 0]*deg, ND_RMPipe, PS_Default, ["EtCon"])
RMHorizPipe := PipeFtrial(RMElbow_Origin, L_RMPipeHoriz, [90; 0; 0]*deg, ND_RMPipe, PS_Default)
RMAirRelease := PipeFtrial(RMAirRelease_Origin, L_RMAirRelease, [0; 90; 0]*deg, ND_RMAirRelease, PS_Default)
RMAirReleaseHole := CylinderF([RMAirRelease_Origin[0]; RMAirRelease_Origin[1]; FlocCoupling_Origin[2]], outerradius(ND_RMAirRelease), outerradius(ND_RMPipe) + zc, [0; 90; 0]*deg)
FreezeRMPipe := FreezeLayer("EtRmPipePlu")
SelectRMPipes := SelectLayer("EtRmPipePlu")
# LFOM Orifices
LFOM_Origin0 := [RMElbow_Origin[0]; RMElbow_Origin[1] + ElbowRadius(ND_RMPipe); ZW_Et - HL_Flowmeasure]
LFOM_Origin1 := [RMElbow_Origin[0]; RMElbow_Origin[1] + ElbowRadius(ND_RMPipe); ZW_Et - HL_Flowmeasure]
LFOM_Origin :=
    LFOM_Origin0 if EN_EtGrit == 0
    LFOM_Origin1 otherwise
LfomOrifices :=
    Local ← FreezeRMPipe
    for h ∈ 0 .. last(H_LfomOrifices)
        if N_LfomOrifices[h] ≠ 0
            Local ← stack(Local, CylinderF([LFOM_Origin[0]; LFOM_Origin[1]; LFOM_Origin[2] + H_LfomOrifices[h]], D_LfomOrifices/2, outerradius(ND_RMPipe) + zc, [
                90 deg + (asin(0.5*S_LfomOrificesMin/(2*outerradius(ND_RMPipe))) + asin(D_LfomOrifices/(2*outerradius(ND_RMPipe))))*(mod(h, 2) == 0);
                0 deg
            ]))
        Local ← stack(Local, ArrayLastPolar([LFOM_Origin[0]; LFOM_Origin[1]; LFOM_Origin[2] + H_LfomOrifices[h]], N_LfomOrifices[h], (N_LfomOrifices[h] - 1)*(2*asin(D_LfomOrifices/(2*outerradius(ND_RMPipe))) + 2*asin(S_LfomOrificesMin/(2*outerradius(ND_RMPipe)))))) if N_LfomOrifices[h] > 1
    return Local
SubtractRMPipeOrifices := SubtractF(["EtRmPipePlu"], "DeleteMe")
RMScript := stack(RMElbowLayer, RMElbow, FreezeRMElbow, RMPipeLayer, getPipeDraw(RMVertPipe), getPipeDraw(RMHorizPipe), FreezeRMPipe, RMAirReleaseHole, GroupDelete, SubtractRMPipeOrifices, SelectRMPipes, getPipeDraw(RMAirRelease), LfomOrifices, GroupDelete, SubtractRMPipeOrifices)
PMatDummy := getPipeDat(PMat, RMVertPipe)
PMatDummy := getPipeDat(PMat, RMHorizPipe)
PMatDummy := getPipeDat(PMat, RMAirRelease)
# High Flow LFOM Sheet and Channel | no pipes
EtConLayer := SelectLayer("EtCon")
W_DCWalkway + 3*T_PlantWall + L_LfomChannel
LfomChannel_Dim := [L_LfomChannel; W_LfomChannel; H_LfomChannel + Z_LfomChannelBottom] = [0.4848; 0.45; 2.46158] m
RMChannel_Origin := [
    Et_Origin[0] - L_Et + W_DCWalkway + 3*T_PlantWall + L_LfomChannel + W_RMChannel;
    Et_Origin[1] - T_PlantWall - L_RMChannel + T_LfomChannelWall;
    Floc_Origin[2]
] = [-2.61788; 5.0004; 0] m
RMChannel_Dim := [W_RMChannel; L_RMChannel; H_RMChannel] = [0.45; 1; 0.45] m
LfomSheet_Dim := [-L_LfomChannel; T_LfomSheet; HL_Lfom + H_PlantFreeboard + T_ConcreteMin]
LfomSheet_Origin := [
    LfomChannel_Origin[0];
    LfomChannel_Origin[1] + W_LfomChannel + 0.5*(T_ChannelWall - T_LfomSheet);
    Z_EtTop - LfomSheet_Dim[2]
] = [-2.58308; 6.6504; 2.04164] m
LfomChannel := Tank(LfomChannel_Origin, LfomChannel_Dim, T_ChannelWall)
LfomChannelFill := BoxF(LfomChannel_Origin + [T_ChannelWall; 0 m; 0 m], LfomChannel_Origin + [-L_LfomChannel; W_LfomChannel + T_ChannelWall; -H_Et + H_LfomChannel], [0; 0; 0]*deg)
RMChannel := Tank(RMChannel_Origin, RMChannel_Dim, T_ChannelWall)
RMChannelTop := BoxF(RMChannel_Origin + [T_LfomChannelWall; -T_LfomChannelWall; H_RMChannel], RMChannel_Origin + [-W_RMChannel - T_LfomChannelWall; L_RMChannel + T_LfomChannelWall; H_RMChannel + T_LfomChannelWall], [0; 0; 0]*deg)
FreezeEtcon := FreezeLayer("EtCon")
RMChannelSubtraction := BoxF(RMChannel_Origin, RMChannel_Origin + [-W_RMChannel; -T_LfomChannelWall; H_RMChannel], [0; 0; 0]*deg)
ChannelSubtraction := BoxF(LfomChannel_Origin + [-L_LfomChannel; 0 m; 0 m], LfomChannel_Origin + [-L_LfomChannel + W_RMChannel; -T_PlantWall; H_RMChannel], [0; 0; 0]*deg)
SlopeSubtraction := BoxF(LfomChannel_Origin, LfomChannel_Origin + [-L_LfomChannel; W_LfomChannel; LfomChannel_Dim[2]], [0; 0; 0]*deg)
SlopeSubtraction2 := BoxF(LfomChannel2_Origin, LfomChannel2_Origin + [-L_LfomChannel; W_LfomChannel; LfomChannel2_Dim[2]], [0; 0; 0]*deg)
LfomSheetSubtraction := BoxF([LfomChannel_Origin[0] - T_ConcreteMin; LfomChannel_Origin[1] + W_LfomChannel; LfomSheet_Origin[2]], [
    LfomChannel_Origin[0] - L_LfomChannel + T_ConcreteMin;
    LfomChannel_Origin[1] + W_LfomChannel + T_ChannelWall;
    LfomChannel_Origin[2] + LfomChannel_Dim[2]
], [0; 0; 0]*deg)
LfomSheetSlotSubtraction := BoxF([
    LfomChannel_Origin[0];
    LfomChannel_Origin[1] + W_LfomChannel + 0.5*(T_ChannelWall - T_LfomSheet);
    LfomSheet_Origin[2]
], LfomChannel_Origin + [-L_LfomChannel; W_LfomChannel + 0.5*(T_ChannelWall + T_LfomSheet); LfomChannel_Dim[2]], [0; 0; 0]*deg)
LfomChannelOrificeSheetSubtraction := BoxF([
    LfomChannel_Origin[0] + T_LfomSheet;
    LfomChannel_Origin[1];
    LfomChannel_Origin[2] + Z_LfomChannelOrifice
], [
    LfomChannel_Origin[0] - T_LfomSheet - L_LfomChannel;
    LfomChannel_Origin[1] + W_LfomChannel;
    LfomChannel_Origin[2] + T_LfomSheet + Z_LfomChannelOrifice
], [0; 0; 0]*deg)
# GroupDelete
ChannelSubtractions := SubtractF(["EtCon"], "DeleteMe")
LfomSheetLayer := layer_new("EtLfomSheet", ltpurple)
LfomSheet := BoxF(LfomSheet_Origin, LfomSheet_Origin + LfomSheet_Dim, [0; 0; 0]*deg)
LfomChannelSheet := BoxF([
    LfomChannel_Origin[0] + T_LfomSheet;
    LfomChannel_Origin[1];
    LfomChannel_Origin[2] + Z_LfomChannelOrifice
], [
    LfomChannel_Origin[0] - T_LfomSheet - L_LfomChannel;
    LfomChannel_Origin[1] + W_LfomChannel;
    LfomChannel_Origin[2] + T_LfomSheet + Z_LfomChannelOrifice
], [0; 0; 0]*deg)
FrzLfomSheetLayer := FreezeLayer("EtLfomSheet")
LfomOrifices :=
    Local ← FrzLfomSheetLayer
    for h ∈ 0 .. last(H_LfomOrifices)
        if N_LfomOrifices[h] ≠ 0
            Local ← stack(Local, CylinderF([
                (LfomSheet_Origin[0] - T_ConcreteMin - 0.5*(D_LfomOrifices + S_LfomOrificesMin)) - 0.5*(S_LfomOrificesMin + D_LfomOrifices)*(mod(h, 2) == 0);
                LfomSheet_Origin[1];
                Z_LfomChannelBottom + T_ConcreteMin + HW_LfomChannel + H_Freefall + H_LfomOrifices[h]
            ], D_LfomOrifices/2, T_LfomSheet + zc, [-90; 0]*deg))
        Local ← stack(Local, ArrayLast(1, N_LfomOrifices[h], -(D_LfomOrifices + S_LfomOrificesMin))) if N_LfomOrifices[h] > 1
    return Local
LfomChannelOrifice := CylinderF([
    LfomChannel_Origin[0] - L_LfomChannel/2;
    LfomChannel_Origin[1] + W_LfomChannel/2;
    LfomChannel_Origin[2] + Z_LfomChannelOrifice
], D_LfomChannelOrifice/2, T_LfomSheet + zc, [0; 0]*deg)
RotateOrifice := Rotate3DLast([
    LfomChannel_Origin[0] - L_LfomChannel/2;
    LfomChannel_Origin[1] + W_LfomChannel/2;
    LfomChannel_Origin[2] + Z_LfomChannelOrifice
], "y", 90 deg)
# GroupDelete
SubtractLfomOrifices := SubtractF(["EtLfomSheet"], "DeleteMe")
ThawSheets := ThawMultiple(["EtLfomSheet"])
MirrorSheets := Mirror3dAll("YZ", [
    Et_Origin[0] - L_Et + W_DCWalkway + 3*T_PlantWall + L_LfomChannel - 1/2*W_DCWalkway - T_PlantWall;
    0 m;
    0 m
], "N")
FreezeSheets := FreezeMultiple(["EtLfomSheet"])
LfomChannelScript := stack(EtConLayer, LfomChannel, LfomChannelFill, RMChannel, RMChannelTop, FreezeEtcon, RMChannelSubtraction, ChannelSubtraction, SlopeSubtraction, SlopeSubtraction2, LfomSheetSubtraction, LfomSheetSlotSubtraction, LfomChannelOrificeSheetSubtraction, GroupDelete, ChannelSubtractions, LfomSheetLayer, LfomSheet, LfomChannelSheet, LfomOrifices, LfomChannelOrifice, RotateOrifice, GroupDelete, SubtractLfomOrifices, ThawSheets, MirrorSheets, FreezeSheets)
# Hopper Drains | some pipes. Some that aren't yet stacked.
DrainCouplingLayer := layer_new("EtDrainCouplingsPlu", green)
ConRadius(ND_EtDrain) + S_Fitting + L_EtHopperFront
DrainWeirCoupling := CouplingSUBF([
    -S_Fitting - ConRadius(ND_EtDrain);
    {
        (ConRadius(ND_EtDrain) + S_Fitting + L_EtHopperFront) if EN_DoubleTrain == 0
        (ConRadius(ND_EtDrain) + S_Fitting + 1/2*W_Et - T_ChannelWall + T_ConcreteMin) otherwise
    };
    -SocketDepth(ND_EtDrain)
] + Et_Origin, [0; 270]*deg, ND_EtDrain, PS_Default, ["EtCon"])
DrainCouplings :=
    Local ← stack(DrainCouplingLayer, DrainWeirCoupling)
    for i ∈ 0 .. (N_EtFullHopper + {
    (AddHopper - 2) if EN_DoubleTrain == 1
    1 otherwise
})
        Local ← stack(Local, CouplingSUBF([
            -(L_EtHopper + T_EtHopperLedge)*i - S_Fitting - ConRadius(ND_EtDrain);
            {
                (ConRadius(ND_EtDrain) + S_Fitting + L_EtHopperFront) if EN_DoubleTrain == 0
                (ConRadius(ND_EtDrain) + S_Fitting + 1/2*W_Et - T_ChannelWall + T_ConcreteMin) otherwise
            };
            -SocketDepth(ND_EtDrain)
        ] + Et_Origin, [0; 270]*deg, ND_EtDrain, PS_Default, ["EtCon"]))
FreezeDrainCouplings := FreezeLayer("EtDrainCouplingsPlu")
DrainPipeLayer := layer_new("EtDrainPipesPlu", blue)
# AHH ! a complex pipe!
DrainPipes :=
    Local ← stack(FreezeDrainCouplings, DrainPipeLayer)
    for i ∈ 0 .. N_EtFullHopper + {
    (AddHopper - 2) if EN_DoubleTrain == 1
    1 otherwise
}
        Local ← stack(Local, PipeSUBF([
            -(L_EtHopper + T_EtHopperLedge)*i - S_Fitting - ConRadius(ND_EtDrain);
            {
                (ConRadius(ND_EtDrain) + S_Fitting + L_EtHopperFront) if EN_DoubleTrain == 0
                (ConRadius(ND_EtDrain) + S_Fitting + .5*W_Et - T_ChannelWall + T_ConcreteMin) otherwise
            };
            SocketDepth(ND_EtDrain) - CouplingLength(ND_EtDrain)
        ] + Et_Origin, T_PlantWall, [0; 270; 0]*deg, ND_EtDrain, PS_Default, ["EtCon"]))
# For this pipe, I will try leaving the pipe drawign alonw while keeping the format in mind to change the pipe matrix.
PMatDummy :=
    for i ∈ 0 .. N_EtFullHopper + {
    (AddHopper - 2) if EN_DoubleTrain == 1
    1 otherwise
}
        pipe ← PipeSUBFtrial([
            -(L_EtHopper + T_EtHopperLedge)*i - S_Fitting - ConRadius(ND_EtDrain);
            {
                (ConRadius(ND_EtDrain) + S_Fitting + L_EtHopperFront) if EN_DoubleTrain == 0
                (ConRadius(ND_EtDrain) + S_Fitting + .5*W_Et - T_ChannelWall + T_ConcreteMin) otherwise
            };
            SocketDepth(ND_EtDrain) - CouplingLength(ND_EtDrain)
        ] + Et_Origin, T_PlantWall, [0; 270; 0]*deg, ND_EtDrain, PS_Default, ["EtCon"])
        PMat ← getPipeDat(PMat, pipe)
FreezePipes := FreezeLayer("EtDrainPipesPlu")
StopperLayer := layer_new("EtDrainStoppersPlu", red)
L_EtDrainStopper := H_Et - H_PlantFreeboard/2 + SocketDepth(ND_EtDrain)
FirstStopper := PipeFtrial([
    -S_Fitting - ConRadius(ND_EtDrain);
    {
        (ConRadius(ND_EtDrain) + S_Fitting + L_EtHopperFront) if EN_DoubleTrain == 0
        (ConRadius(ND_EtDrain) + S_Fitting + .5*W_Et - T_ChannelWall + T_ConcreteMin) otherwise
    };
    -SocketDepth(ND_EtDrain)
] + Et_Origin, L_EtDrainStopper, [0; 90; 0]*deg, ND_EtDrain, PS_Default)
# The same format as above.
StopperPipes :=
    Local ← stack(FreezePipes, StopperLayer)
    for i ∈ 0 .. N_EtFullHopper + {
    (AddHopper - 2) if EN_DoubleTrain == 1
    1 otherwise
}
        Local ← stack(Local, PipeF([
            -(L_EtHopper + T_EtHopperLedge)*i - S_Fitting - ConRadius(ND_EtDrain);
            {
                (ConRadius(ND_EtDrain) + S_Fitting + L_EtHopperFront) if EN_DoubleTrain == 0
                (ConRadius(ND_EtDrain) + S_Fitting + .5*W_Et - T_ChannelWall + T_ConcreteMin) otherwise
            };
            -SocketDepth(ND_EtDrain)
        ] + Et_Origin, L_EtDrainStopper, [0; 90; 0]*deg, ND_EtDrain, PS_Default))
# Note that in practice, if the pipe drawings are all modified to prodice the cell array, then these pipes can just have getPipeDraw(PipeF) all together to result in no net change,
PMatDummy :=
    for i ∈ 0 .. N_EtFullHopper + {
    (AddHopper - 2) if EN_DoubleTrain == 1
    1 otherwise
}
        pipe ← PipeFtrial([
            -(L_EtHopper + T_EtHopperLedge)*i - S_Fitting - ConRadius(ND_EtDrain);
            {
                (ConRadius(ND_EtDrain) + S_Fitting + L_EtHopperFront) if EN_DoubleTrain == 0
                (ConRadius(ND_EtDrain) + S_Fitting + .5*W_Et - T_ChannelWall + T_ConcreteMin) otherwise
            };
            -SocketDepth(ND_EtDrain)
        ] + Et_Origin, L_EtDrainStopper, [0; 90; 0]*deg, ND_EtDrain, PS_Default)
        PMat ← getPipeDat(PMat, pipe)
FreezeStopper := FreezeLayer("EtDrainStoppersPlu")  # The plural pipes don't need to be changed.
EtDrainsRight := stack(DrainCouplings, DrainPipes, StopperPipes, FreezeStopper)
ThawDrains := ThawMultiple(["EtCon"; "EtDrainCouplingsPlu"; "EtDrainPipesPlu"; "EtWeir"; "EtTrashrack"; "Cdc"; "CdcFittings"; "EtDrainStoppersPlu"])
MirrorDrains := Mirror3dAll("YZ", [Plant_Origin[0] - 1/2*L_Sed; 0 m; 0 m], "Y")
FreezeDrains := FreezeMultiple(["EtCon"; "EtDrainCouplingsPlu"; "EtDrainPipesPlu"; "EtWeir"; "EtTrashrack"; "Cdc"; "CdcFittings"; "EtDrainStoppersPlu"])
EtDrainsLeft := stack(ThawDrains, MirrorDrains, FreezeDrains)
# Hopper Drains Two Inlets | more of the same
# The way our change works is we have functions to mirror the drains. This originally included a i = 0
# section for the first hopper drain piece, but this was taken out for the three areas (Drain Coupling, Pipe, and stopper.
#
# Then I added this first part in before the full stack function to create two pieces (two drains, two couplings, to stoppers) in the first hopper. Making them independent of the mirror function allows us to change their location easily without modifying the rest.
DrainCouplingLayer := layer_new("EtDrainCouplingsPlu", green)
DrainWeirCoupling := CouplingSUBF([
    (-S_Fitting - ConRadius(ND_EtDrain));
    ConRadius(ND_EtDrain) + S_Fitting + L_EtHopperFront;
    -SocketDepth(ND_EtDrain)
] + Et_Origin, [0; 270]*deg, ND_EtDrain, PS_Default, ["EtCon"])
DrainWeirCoupling_1 := CouplingSUBF([
    (-S_Fitting - ConRadius(ND_EtDrain));
    ConRadius(ND_EtDrain) + S_Fitting + L_EtHopperFront + 2*ConRadius(ND_EtDrain) + S_Fitting + (2*T_EtRemovableWallSupport + T_EtRemovableWall + S_Fitting);
    -SocketDepth(ND_EtDrain)
] + Et_Origin, [0; 270]*deg, ND_EtDrain, PS_Default, ["EtCon"])
DrainCouplings :=
    Local ← stack(DrainCouplingLayer, DrainWeirCoupling, DrainWeirCoupling_1)
    for i ∈ 1 .. (N_EtFullHopper + 1)
        Local ← stack(Local, CouplingSUBF([
            -(L_EtHopper + T_EtHopperLedge)*i - S_Fitting - ConRadius(ND_EtDrain);
            ConRadius(ND_EtDrain) + S_Fitting + L_EtHopperFront;
            -SocketDepth(ND_EtDrain)
        ] + Et_Origin, [0; 270]*deg, ND_EtDrain, PS_Default, ["EtCon"]))
# Stacks both couplings in first
# hopper and adds row of the rest
# of the hoppers
# I added Drain Weir Coupling.1
# Started i at 1 instead of 0. 0 is
# Covered in Drain weir Coupling
FreezeDrainCouplings := FreezeLayer("EtDrainCouplingsPlu")
DrainPipeLayer := layer_new("EtDrainPipesPlu", blue)
# Created two
# Drain SUBF's
DrainPipe_0 := PipeSUBFtrial([
    -S_Fitting - ConRadius(ND_EtDrain);
    ConRadius(ND_EtDrain) + S_Fitting + L_EtHopperFront;
    SocketDepth(ND_EtDrain) - CouplingLength(ND_EtDrain)
] + Et_Origin, T_PlantWall, [0; 270; 0]*deg, ND_EtDrain, PS_Default, ["EtCon"])
DrainPipe_1 := PipeSUBFtrial([
    -S_Fitting - ConRadius(ND_EtDrain);
    ConRadius(ND_EtDrain) + S_Fitting + L_EtHopperFront + (2*ConRadius(ND_EtDrain) + S_Fitting) + (2*T_EtRemovableWallSupport + T_EtRemovableWall + S_Fitting);
    SocketDepth(ND_EtDrain) - CouplingLength(ND_EtDrain)
] + Et_Origin, T_PlantWall, [0; 270; 0]*deg, ND_EtDrain, PS_Default, ["EtCon"])
DrainPipes :=
    Local ← stack(FreezeDrainCouplings, DrainPipeLayer, getPipeDraw(DrainPipe_0), getPipeDraw(DrainPipe_1))
    for i ∈ 1 .. N_EtFullHopper + 1
        Local ← stack(Local, PipeSUBF([
            -(L_EtHopper + T_EtHopperLedge)*i - S_Fitting - ConRadius(ND_EtDrain);
            ConRadius(ND_EtDrain) + S_Fitting + L_EtHopperFront;
            SocketDepth(ND_EtDrain) - CouplingLength(ND_EtDrain)
        ] + Et_Origin, T_PlantWall, [0; 270; 0]*deg, ND_EtDrain, PS_Default, ["EtCon"]))
# Added in first two pipes to local
# Changed i to 1 from 0
PMat :=
    k ← getPipeDat(PMat, DrainPipe_0)
    k ← getPipeDat(k, DrainPipe_1)
    for i ∈ 1 .. N_EtFullHopper + 1
        pipe ← PipeSUBFtrial([
            -(L_EtHopper + T_EtHopperLedge)*i - S_Fitting - ConRadius(ND_EtDrain);
            ConRadius(ND_EtDrain) + S_Fitting + L_EtHopperFront;
            SocketDepth(ND_EtDrain) - CouplingLength(ND_EtDrain)
        ] + Et_Origin, T_PlantWall, [0; 270; 0]*deg, ND_EtDrain, PS_Default, ["EtCon"])
        k ← getPipeDat(k, pipe)
FreezePipes := FreezeLayer("EtDrainPipesPlu")
StopperLayer := layer_new("EtDrainStoppersPlu", red)
L_EtDrainStopper := H_Et - H_PlantFreeboard/2 + SocketDepth(ND_EtDrain)
FirstStopper_0 := PipeFtrial([
    (-S_Fitting - ConRadius(ND_EtDrain));
    ConRadius(ND_EtDrain) + S_Fitting + L_EtHopperFront;
    -SocketDepth(ND_EtDrain)
] + Et_Origin, L_EtDrainStopper, [0; 90; 0]*deg, ND_EtDrain, PS_Default)
# Two New functions
# taken from StopperPipes
# Function for first two
# stoppers
FirstStopper_1 := PipeFtrial([
    (-S_Fitting - ConRadius(ND_EtDrain));
    ConRadius(ND_EtDrain) + S_Fitting + L_EtHopperFront + (2*ConRadius(ND_EtDrain) + S_Fitting) + (2*T_EtRemovableWallSupport + T_EtRemovableWall + S_Fitting);
    -SocketDepth(ND_EtDrain)
] + Et_Origin, L_EtDrainStopper, [0; 90; 0]*deg, ND_EtDrain, PS_Default)
# Changed i to 1
# added to layer
StopperPipes :=
    Local ← stack(FreezePipes, StopperLayer, FirstStopper_0, FirstStopper_1)
    for i ∈ 1 .. N_EtFullHopper + 1
        Local ← stack(Local, PipeF([
            -(L_EtHopper + T_EtHopperLedge)*i - S_Fitting - ConRadius(ND_EtDrain);
            ConRadius(ND_EtDrain) + S_Fitting + L_EtHopperFront;
            -SocketDepth(ND_EtDrain)
        ] + Et_Origin, L_EtDrainStopper, [0; 90; 0]*deg, ND_EtDrain, PS_Default))
PMat :=
    k ← getPipeDat(PMat, FirstStopper_0)
    k ← getPipeDat(k, FirstStopper_1)
    for i ∈ 1 .. N_EtFullHopper + 1
        pipe ← PipeFtrial([
            -(L_EtHopper + T_EtHopperLedge)*i - S_Fitting - ConRadius(ND_EtDrain);
            ConRadius(ND_EtDrain) + S_Fitting + L_EtHopperFront;
            -SocketDepth(ND_EtDrain)
        ] + Et_Origin, L_EtDrainStopper, [0; 90; 0]*deg, ND_EtDrain, PS_Default)
        k ← getPipeDat(k, pipe)
FreezeStopper := FreezeLayer("EtDrainStoppersPlu")
# all set to stack
EtDrainsRight2Inlets := stack(DrainCouplings, DrainPipes, StopperPipes, FreezeStopper)
ThawDrains := ThawMultiple(["EtCon"; "EtDrainCouplingsPlu"; "EtDrainPipesPlu"; "EtWeir"; "EtTrashrack"; "Cdc"; "CdcFittings"; "EtDrainStoppersPlu"])
MirrorDrains := Mirror3dAll("YZ", [Plant_Origin[0] - 1/2*L_Sed; 0 m; 0 m], "Y")
FreezeDrains := FreezeMultiple(["EtCon"; "EtDrainCouplingsPlu"; "EtDrainPipesPlu"; "EtWeir"; "EtTrashrack"; "Cdc"; "CdcFittings"; "EtDrainStoppersPlu"])
EtDrainsLeft2Inlets := stack(ThawDrains, MirrorDrains, FreezeDrains)
# three pipes
# Overflow Drain Grit
# The half of the PVC overflow channel closer to the right-hand end of the tank (from top view):
L_EtFrontToOverflowWeir :=
    (L_EtHopperFront + 2*ConRadius(ND_EtDrain) + 2*S_Fitting + ConRadius(ND_EtOverflowDrain)) if EN_DoubleTrain == 0
    (.5*L_EtHopperFront + 2*ConRadius(ND_EtDrain) + 2*S_Fitting + ConRadius(ND_EtOverflowDrain)) otherwise
EtChannelPipe1 := PipeFtrial(Et_Origin + [
    -CapThickness(ND_EtOverflowDrain);
    L_EtFrontToOverflowWeir;
    H_EtHopper + HL_Flowmeasure - innerdiameter(ND_EtOverflowDrain, PS_Default)/2 + H_EtOverflowCutaway + H_EtLFOMtoOverflow
], L_EtChannelPipes, [0; 0; 0]*deg, ND_EtOverflowDrain, PS_Default)
# The half of the PVC overflow channel closer to the trash rack:
EtChannelPipe2 := PipeFtrial(Et_Origin + [
    -CapThickness(ND_EtOverflowDrain) - L_EtChannelPipes - TeeLength(ND_EtOverflowDrain);
    L_EtFrontToOverflowWeir;
    H_EtHopper + HL_Flowmeasure - innerdiameter(ND_EtOverflowDrain, PS_Default)/2 + H_EtOverflowCutaway + H_EtLFOMtoOverflow
], L_EtChannelPipes, [0; 0; 0]*deg, ND_EtOverflowDrain, PS_Default)
EtOverflowTee := TeeF(Et_Origin + [
    -CapThickness(ND_EtOverflowDrain) - L_EtChannelPipes - TeeLength(ND_EtOverflowDrain)/2;
    L_EtFrontToOverflowWeir;
    H_EtHopper + HL_Flowmeasure - innerdiameter(ND_EtOverflowDrain, PS_Default)/2 + H_EtOverflowCutaway + H_EtLFOMtoOverflow - ShortTeeLength(ND_EtOverflowDrain)
], [0; 0; -90]*deg, ND_EtOverflowDrain, PS_Default)
EtOverflowCap1 := CapF(Et_Origin + [
    -CapThickness(ND_EtOverflowDrain);
    L_EtFrontToOverflowWeir;
    H_EtHopper + HL_Flowmeasure - innerdiameter(ND_EtOverflowDrain, PS_Default)/2 + H_EtOverflowCutaway + H_EtLFOMtoOverflow
], [0; 0; 0]*deg, ND_EtOverflowDrain)
EtOverflowCap2 := CapF(Et_Origin + [
    -CapThickness(ND_EtOverflowDrain) - 2*L_EtChannelPipes - TeeLength(ND_EtOverflowDrain);
    L_EtFrontToOverflowWeir;
    H_EtHopper + HL_Flowmeasure - innerdiameter(ND_EtOverflowDrain, PS_Default)/2 + H_EtOverflowCutaway + H_EtLFOMtoOverflow
], [0; 180; 0]*deg, ND_EtOverflowDrain)
L_EtOverflowPipeVert0 := H_EtHopper + HL_Flowmeasure - innerdiameter(ND_EtOverflowDrain, PS_Default)/2 + H_EtOverflowCutaway + H_EtLFOMtoOverflow - ShortTeeLength(ND_EtOverflowDrain) + T_PlantWall + zc
EtOverflowPipeVert := PipeSUBFtrial(Et_Origin + [
    -CapThickness(ND_EtOverflowDrain) - L_EtChannelPipes - TeeLength(ND_EtOverflowDrain)/2;
    L_EtFrontToOverflowWeir;
    H_EtHopper + HL_Flowmeasure - innerdiameter(ND_EtOverflowDrain, PS_Default)/2 + H_EtOverflowCutaway + H_EtLFOMtoOverflow - ShortTeeLength(ND_EtOverflowDrain)
], L_EtOverflowPipeVert0, [0; -90; 0]*deg, ND_EtOverflowDrain, PS_Default, ["EtCon"])
EtOverflowElbow := ElbowSUBF(Et_Origin + [
    -CapThickness(ND_EtOverflowDrain) - L_EtChannelPipes - TeeLength(ND_EtOverflowDrain)/2;
    L_EtFrontToOverflowWeir;
    -T_PlantWall - ConRadius(ND_EtOverflowDrain) + ElbowRadius(ND_EtOverflowDrain)
], [90; 270; 0]*deg, ND_EtOverflowDrain, PS_Default, ["EtCon"])
EtOverflowWeirSlot := BoxF(Et_Origin + [
    0;
    L_EtFrontToOverflowWeir - W_EtOverflowSlot/2;
    H_EtHopper + HL_Flowmeasure + H_EtLFOMtoOverflow - zc
], Et_Origin + [
    -CapThickness(ND_EtOverflowDrain) - L_EtOverflowWeir/2;
    L_EtFrontToOverflowWeir + W_EtOverflowSlot/2;
    H_EtHopper + HL_Flowmeasure + H_EtOverflowCutaway + H_EtLFOMtoOverflow + CapThickness(ND_EtOverflowDrain) + 2*zc
], [0; 0; 0]*deg)
EtOverflowFittingLayer := layer_new("EtOverflowFittingPlu", green)
FreezeEtOverflowFittings := FreezeLayer("EtOverflowFittingPlu")
EtOverflowPipeLayer := layer_new("EtOverflowPipePlu", blue)
FreezeEtOverflowPipe := FreezeLayer("EtOverflowPipePlu")
SubtractSlotFromFittings := SubtractF(["EtOverflowFittingPlu"], "DeleteMe")
SubtractSlotFromPipes := SubtractF(["EtOverflowPipePlu"], "DeleteMe")
EtOverflowPluScript0 := stack(EtOverflowFittingLayer, EtOverflowTee, EtOverflowCap1, EtOverflowCap2, FreezeEtOverflowFittings, EtOverflowPipeLayer, getPipeDraw(EtOverflowPipeVert), getPipeDraw(EtChannelPipe1), getPipeDraw(EtChannelPipe2), FreezeEtOverflowPipe, EtOverflowWeirSlot, GroupDelete, SubtractSlotFromFittings, EtOverflowWeirSlot, GroupAll("DeleteMe"), SubtractSlotFromPipes)
PMatDummy := getPipeDat(PMat, EtOverflowPipeVert)
PMatDummy := getPipeDat(PMat, EtChannelPipe2)
PMatDummy := getPipeDat(PMat, EtChannelPipe1)
# three pipes
# Overflow Drain Grit Two Inlets
# The half of the PVC overflow channel closer to the right-hand end of the tank (from top view):
L_EtFrontToOverflowWeir := L_EtHopperFront + 2*ConRadius(ND_EtDrain) + 2*S_Fitting + ConRadius(ND_EtOverflowDrain)
Et_OverflowWeirOrigin := Et_Origin + [-L_EtHopper; 0 m; 0 m]
EtChannelPipe1 := PipeFtrial(Et_OverflowWeirOrigin + [
    -CapThickness(ND_EtOverflowDrain);
    L_EtFrontToOverflowWeir;
    H_EtHopper + HL_Flowmeasure - innerdiameter(ND_EtOverflowDrain, PS_Default)/2 + H_EtOverflowCutaway + H_EtLFOMtoOverflow
], L_EtChannelPipes, [0; 0; 0]*deg, ND_EtOverflowDrain, PS_Default)
# The half of the PVC overflow channel closer to the trash rack:
EtChannelPipe2 := PipeFtrial(Et_OverflowWeirOrigin + [
    -CapThickness(ND_EtOverflowDrain) - L_EtChannelPipes - TeeLength(ND_EtOverflowDrain);
    L_EtFrontToOverflowWeir;
    H_EtHopper + HL_Flowmeasure - innerdiameter(ND_EtOverflowDrain, PS_Default)/2 + H_EtOverflowCutaway + H_EtLFOMtoOverflow
], L_EtChannelPipes, [0; 0; 0]*deg, ND_EtOverflowDrain, PS_Default)
EtOverflowTee := TeeF(Et_OverflowWeirOrigin + [
    -CapThickness(ND_EtOverflowDrain) - L_EtChannelPipes - TeeLength(ND_EtOverflowDrain)/2;
    L_EtFrontToOverflowWeir;
    H_EtHopper + HL_Flowmeasure - innerdiameter(ND_EtOverflowDrain, PS_Default)/2 + H_EtOverflowCutaway + H_EtLFOMtoOverflow - ShortTeeLength(ND_EtOverflowDrain)
], [0; 0; -90]*deg, ND_EtOverflowDrain, PS_Default)
EtOverflowCap1 := CapF(Et_OverflowWeirOrigin + [
    -CapThickness(ND_EtOverflowDrain);
    L_EtFrontToOverflowWeir;
    H_EtHopper + HL_Flowmeasure - innerdiameter(ND_EtOverflowDrain, PS_Default)/2 + H_EtOverflowCutaway + H_EtLFOMtoOverflow
], [0; 0; 0]*deg, ND_EtOverflowDrain)
EtOverflowCap2 := CapF(Et_OverflowWeirOrigin + [
    -CapThickness(ND_EtOverflowDrain) - 2*L_EtChannelPipes - TeeLength(ND_EtOverflowDrain);
    L_EtFrontToOverflowWeir;
    H_EtHopper + HL_Flowmeasure - innerdiameter(ND_EtOverflowDrain, PS_Default)/2 + H_EtOverflowCutaway + H_EtLFOMtoOverflow
], [0; 180; 0]*deg, ND_EtOverflowDrain)
L_EtOverflowPipeVert0 := H_EtHopper + HL_Flowmeasure - innerdiameter(ND_EtOverflowDrain, PS_Default)/2 + H_EtOverflowCutaway + H_EtLFOMtoOverflow - ShortTeeLength(ND_EtOverflowDrain) + T_PlantWall + zc
EtOverflowPipeVert := PipeSUBFtrial(Et_OverflowWeirOrigin + [
    -CapThickness(ND_EtOverflowDrain) - L_EtChannelPipes - TeeLength(ND_EtOverflowDrain)/2;
    L_EtFrontToOverflowWeir;
    H_EtHopper + HL_Flowmeasure - innerdiameter(ND_EtOverflowDrain, PS_Default)/2 + H_EtOverflowCutaway + H_EtLFOMtoOverflow - ShortTeeLength(ND_EtOverflowDrain)
], L_EtOverflowPipeVert0, [0; -90; 0]*deg, ND_EtOverflowDrain, PS_Default, ["EtCon"])
EtOverflowWeirSlot := BoxF(Et_OverflowWeirOrigin + [
    0;
    L_EtFrontToOverflowWeir - W_EtOverflowSlot/2;
    H_EtHopper + HL_Flowmeasure + H_EtLFOMtoOverflow - zc
], Et_OverflowWeirOrigin + [
    -CapThickness(ND_EtOverflowDrain) - L_EtOverflowWeir/2;
    L_EtFrontToOverflowWeir + W_EtOverflowSlot/2;
    H_EtHopper + HL_Flowmeasure + H_EtOverflowCutaway + H_EtLFOMtoOverflow + CapThickness(ND_EtOverflowDrain) + 2*zc
], [0; 0; 0]*deg)
EtOverflowFittingLayer := layer_new("EtOverflowFittingPlu", green)
FreezeEtOverflowFittings := FreezeLayer("EtOverflowFittingPlu")
EtOverflowPipeLayer := layer_new("EtOverflowPipePlu", blue)
FreezeEtOverflowPipe := FreezeLayer("EtOverflowPipePlu")
Et_OverflowWeirPipe
SubtractSlotFromFittings := SubtractF(["EtOverflowFittingPlu"], "DeleteMe")
SubtractSlotFromPipes := SubtractF(["EtOverflowPipePlu"], "DeleteMe")
EtOverflowPluScript2 := stack(EtOverflowFittingLayer, EtOverflowTee, EtOverflowCap1, EtOverflowCap2, FreezeEtOverflowFittings, EtOverflowPipeLayer, getPipeDraw(EtOverflowPipeVert), getPipeDraw(EtChannelPipe1), getPipeDraw(EtChannelPipe2), FreezeEtOverflowPipe, EtOverflowWeirSlot, GroupDelete, SubtractSlotFromFittings, EtOverflowWeirSlot, GroupAll("DeleteMe"), SubtractSlotFromPipes)
PMatDummy := getPipeDat(PMat, EtOverflowPipeVert)
PMatDummy := getPipeDat(PMat, EtChannelPipe1)
PMatDummy := getPipeDat(PMat, EtChannelPipe2)
# four pipes
EtOverflowElbow_Origin := [
    -L_Et + 2*(S_Fitting + ConRadius(ND_RMPipe)) + SocketDepth(ND_EtOverflowDrain) + ElbowRadius(ND_EtOverflowDrain);
    W_Et/2;
    -max(T_PlantWall, CouplingLength(ND_EtOverflowDrain)) - SocketDepth(ND_EtOverflowDrain)
] + Et_Origin
EtOverflowCoupling_Origin := [
    -L_Et + 2*(S_Fitting + ConRadius(ND_RMPipe)) + SocketDepth(ND_EtOverflowDrain) + ElbowRadius(ND_EtOverflowDrain);
    W_Et/2;
    -SocketDepth(ND_EtOverflowDrain)
] + Et_Origin
EtOverflowTee_Origin := [
    EtOverflowCoupling_Origin[0];
    EtOverflowCoupling_Origin[1];
    Et_Origin[2] + H_Et - H_PlantFreeboard + H_EtLFOMtoOverflow + H_EtOverflowCutaway - innerdiameter(ND_EtOverflowDrain, PS_Default)/2 - ShortTeeLength(ND_EtOverflowDrain)
]
EtOverflowCap1_Origin := [
    EtOverflowTee_Origin[0];
    Et_Origin[1] + W_Et - CapThickness(ND_EtOverflowDrain);
    EtOverflowTee_Origin[2] + ShortTeeLength(ND_EtOverflowDrain)
]
EtOverflowCap2_Origin := [
    EtOverflowTee_Origin[0];
    Et_Origin[1] + CapThickness(ND_EtOverflowDrain);
    EtOverflowTee_Origin[2] + ShortTeeLength(ND_EtOverflowDrain)
]
EtOverflowFittingsLayer := layer_new("EtOverflowDrainFittingsPlu", green)
EtOverflowElbow := ElbowF(EtOverflowElbow_Origin, [0; 0; 270]*deg, ND_EtOverflowDrain, PS_Default)  # must subtract out of drain channel later
.
EtOverflowCoupling := CouplingSUBF(EtOverflowCoupling_Origin, [0; 270]*deg, ND_EtOverflowDrain, PS_Default, ["EtCon"])
EtOverflowTee := TeeF(EtOverflowTee_Origin, [90; 270; 0]*deg, ND_EtOverflowDrain, PS_Default)
EtOverflowCap1 := CapF(EtOverflowCap1_Origin, [90; 0]*deg, ND_EtOverflowDrain)
EtOverflowCap2 := CapF(EtOverflowCap2_Origin, [270; 0]*deg, ND_EtOverflowDrain)
EtOverflowFittingsFrz := FreezeLayer("EtOverflowDrainFittingsPlu")
EtOverflowCutaway := BoxF([W_EtOverflowSlot/1.5; CapThickness(ND_EtOverflowDrain); ConRadius(ND_EtOverflowDrain) + zc] + EtOverflowCap1_Origin, [
    -W_EtOverflowSlot/1.5;
    -CapThickness(ND_EtOverflowDrain);
    innerdiameter(ND_EtOverflowDrain, PS_Default)/2 - H_EtOverflowCutaway
] + EtOverflowCap2_Origin, [0; 0; 0]*deg)
EtOverflowFittingsSub := SubtractF(["EtOverflowDrainFittingsPlu"], "DeleteMe")
EtOverflowFittingsPlu := stack(EtOverflowFittingsLayer, EtOverflowElbow, EtOverflowCoupling, EtOverflowTee, EtOverflowCap1, EtOverflowCap2, EtOverflowFittingsFrz, EtOverflowCutaway, GroupDelete, EtOverflowFittingsSub)
EtOverflowPipesLayer := layer_new("EtOverflowDrainPlu", blue)
L_EtOverflowNipple := EtOverflowCoupling_Origin[2] - CouplingLength(ND_EtOverflowDrain) + 2*SocketDepth(ND_EtOverflowDrain) - EtOverflowElbow_Origin[2]
EtOverflowNipple := PipeSUBFtrial(EtOverflowElbow_Origin, L_EtOverflowNipple, [0; 90]*deg, ND_EtOverflowDrain, PS_Default, ["EtCon"])
L_EtOverflowPipeVert1 := EtOverflowTee_Origin[2] - EtOverflowCoupling_Origin[2]
EtOverflowVertPipe := PipeFtrial(EtOverflowCoupling_Origin, L_EtOverflowPipeVert1, [0; 90]*deg, ND_EtOverflowDrain, PS_Default)
L_EtOverflowHorizPipes := 0.5*(W_Et - 2*CapThickness(ND_EtOverflowDrain) - TeeLength(ND_EtOverflowDrain))
EtOverflowHorizPipe1 := PipeFtrial(EtOverflowCap1_Origin, L_EtOverflowHorizPipes, [90; 0]*deg, ND_EtOverflowDrain, PS_Default)
EtOverflowHorizPipe2 := PipeFtrial(EtOverflowCap2_Origin, L_EtOverflowHorizPipes, [270; 0]*deg, ND_EtOverflowDrain, PS_Default)
EtOverflowPipesFrz := FreezeLayer("EtOverflowDrainPlu")
EtOverflowPipesSub := SubtractF(["EtOverflowDrainPlu"], "DeleteMe")
EtOverflowPipesPlu := stack(EtOverflowPipesLayer, getPipeDraw(EtOverflowNipple), getPipeDraw(EtOverflowVertPipe), getPipeDraw(EtOverflowHorizPipe1), getPipeDraw(EtOverflowHorizPipe2), EtOverflowPipesFrz, EtOverflowCutaway, GroupDelete, EtOverflowPipesSub)
EtOverflowPluScript1 := stack(EtOverflowFittingsPlu, EtOverflowPipesPlu)
PMatDummy := getPipeDat(PMat, EtOverflowNipple)
PMatDummy := getPipeDat(PMat, EtOverflowVertPipe)
PMatDummy := getPipeDat(PMat, EtOverflowHorizPipe1)
PMatDummy := getPipeDat(PMat, EtOverflowHorizPipe2)
# Overflow Drain No Grit
# four pipes
# Flow Control Drain Grit
L_EtFlowControlComponents := 2*MaleAdapterLength(ND_EtFlowControl) + ValveLength(ND_EtFlowControl) - 2*ValveSocket(ND_EtFlowControl) + SocketDepth(ND_EtFlowControl) + ElbowRadius(ND_EtFlowControl)
Z_EtFlowControl := max(Z_Walkway + ConRadius(ND_EtFlowControl), Et_Origin[2] - H_EtDC - T_PlantWall + ConRadius(ND_EtFlowControl) + 2*ElbowRadius(ND_EtFlowControl) + 2*SocketDepth(ND_EtFlowControl)) = 1.6882 m
EtFlowControlPipeLayer := layer_new("EtFlowControlPipePlu", blue)
L_EtFlowControlHorizPipe1 := SocketDepth(ND_EtFlowControl) + T_PlantWall
L_EtFlowControlHorizPipe2 := SocketDepth(ND_EtFlowControl) + T_PlantWall + 2*MaleAdapterLength(ND_EtFlowControl) + ValveLength(ND_EtFlowControl) - 2*ValveSocket(ND_EtFlowControl)
EtFlowControlHorizPipe1_Origin := [
    Et_Origin[0] + T_PlantWall + SocketDepth(ND_EtFlowControl);
    {
        (Et_Origin[1] + L_EtHopperFront + ConRadius(ND_EtDrain) + S_Fitting) if EN_DoubleTrain == 0
        (Et_Origin[1] + .5*L_EtHopperFront + 3*ConRadius(ND_EtDrain) + S_Fitting) otherwise
    };
    Z_EtFlowControl
]
EtFlowControlHorizPipe1 := PipeSUBFtrial(EtFlowControlHorizPipe1_Origin, L_EtFlowControlHorizPipe1, [0; 0; 0]*deg, ND_EtFlowControl, PS_Default, ["EtCon"])
EtFlowControlHorizPipe2 := PipeSUBFtrial([
    Et_Origin[0] + L_EtFlowControlHorizPipe2;
    EtFlowControlHorizPipe1_Origin[1];
    min(Et_Origin[2] - T_PlantWall - ConRadius(ND_EtFlowControl), Z_EtFlowControl - 2*ElbowRadius(ND_EtFlowControl) - 2*SocketDepth(ND_EtFlowControl))
], L_EtFlowControlHorizPipe2, [0; 0; 0]*deg, ND_EtFlowControl, PS_Default, ["EtCon"])
EtFlowControlNipple1 := PipeFtrial([
    Et_Origin[0] + T_PlantWall + SocketDepth(ND_EtFlowControl) + 2*MaleAdapterLength(ND_EtFlowControl) + ValveLength(ND_EtFlowControl) - 2*ValveSocket(ND_EtFlowControl);
    EtFlowControlHorizPipe1_Origin[1];
    Z_EtFlowControl
], 2*SocketDepth(ND_EtFlowControl), [0; 0; 0]*deg, ND_EtFlowControl, PS_Default)
L_EtFlowControlVert := Z_EtFlowControl - min(Et_Origin[2] - T_PlantWall - ConRadius(ND_EtFlowControl), Z_EtFlowControl - 2*ElbowRadius(ND_EtFlowControl) - 2*SocketDepth(ND_EtFlowControl)) - 2*ElbowRadius(ND_EtFlowControl) = 0.114 m
EtFlowControlVertPipe_Origin := [
    Et_Origin[0] + T_PlantWall + SocketDepth(ND_EtFlowControl) + 2*MaleAdapterLength(ND_EtFlowControl) + ValveLength(ND_EtFlowControl) - 2*ValveSocket(ND_EtFlowControl) + ElbowRadius(ND_EtFlowControl);
    EtFlowControlHorizPipe1_Origin[1];
    Z_EtFlowControl - ElbowRadius(ND_EtFlowControl)
]
EtFlowControlVertPipe := PipeFtrial(EtFlowControlVertPipe_Origin, L_EtFlowControlVert, [0; 270]*deg, ND_EtFlowControl, PS_Default)
EtFlowControlFittingLayer := layer_new("EtFlowControlFittingPlu", green)
EtFlowControlElbow1 := ElbowF([
    EtFlowControlVertPipe_Origin[0] - ElbowRadius(ND_EtFlowControl);
    EtFlowControlHorizPipe1_Origin[1];
    min(Et_Origin[2] - T_PlantWall - ConRadius(ND_EtFlowControl), Z_EtFlowControl - 2*ElbowRadius(ND_EtFlowControl) - 2*SocketDepth(ND_EtFlowControl))
], [-90; 0; 90]*deg, ND_EtFlowControl, PS_Default)
EtFlowControlElbow2 := ElbowF([
    EtFlowControlVertPipe_Origin[0] - ElbowRadius(ND_EtFlowControl);
    EtFlowControlHorizPipe1_Origin[1];
    Z_EtFlowControl
], [-90; 0; -90]*deg, ND_EtFlowControl, PS_Default)
EtFlowControlAdapterLayer := layer_new("EtFlowControlAdapterPlu", blue3)
EtFlowControlAdapter1 := MaleAdapterF([EtFlowControlHorizPipe1_Origin[0]; EtFlowControlHorizPipe1_Origin[1]; Z_EtFlowControl], [180; 0]*deg, ND_EtFlowControl, PS_Default)
EtFlowControlAdapter2 := MaleAdapterF([
    Et_Origin[0] + T_PlantWall + 2*MaleAdapterLength(ND_EtFlowControl) + ValveLength(ND_EtFlowControl) - 2*ValveSocket(ND_EtFlowControl) - SocketDepth(ND_EtFlowControl);
    EtFlowControlHorizPipe1_Origin[1];
    Z_EtFlowControl
], [0; 0]*deg, ND_EtFlowControl, PS_Default)
EtFlowControlValveLayer := layer_new("EtFlowControlValvePlu", blue2)
EtFlowControlValve := insertdwg("https://confluence.cornell.edu/download/attachments/173604905/Et-Scaled-Gate-Valve-Threaded.dwg", [
    EtFlowControlHorizPipe1_Origin[0] - SocketDepth(ND_EtFlowControl) + MaleAdapterLength(ND_EtFlowControl) - ValveSocket(ND_EtFlowControl) + ValveLength(ND_EtFlowControl);
    EtFlowControlHorizPipe1_Origin[1];
    Z_EtFlowControl
], 2*outerradius(ND_EtFlowControl)/(1.16 m), 2*outerradius(ND_EtFlowControl)/(1.16 m), 0 deg)
FlowControlScript0 := stack(EtFlowControlPipeLayer, getPipeDraw(EtFlowControlHorizPipe1), getPipeDraw(EtFlowControlHorizPipe2), getPipeDraw(EtFlowControlNipple1), getPipeDraw(EtFlowControlVertPipe), FreezeLayer("EtFlowControlPipePlu"), EtFlowControlFittingLayer, EtFlowControlElbow1, EtFlowControlElbow2, FreezeLayer("EtFlowControlFittingPlu"), EtFlowControlAdapterLayer, EtFlowControlAdapter1, EtFlowControlAdapter2, FreezeLayer("EtFlowControlAdapterPlu"), EtFlowControlValveLayer, EtFlowControlValve, FreezeLayer("EtFlowControlValvePlu"))
PMatDummy := getPipeDat(PMat, EtFlowControlHorizPipe1)
PMatDummy := getPipeDat(PMat, EtFlowControlHorizPipe2)
PMatDummy := getPipeDat(PMat, EtFlowControlNipple1)
PMatDummy := getPipeDat(PMat, EtFlowControlVertPipe)
# eight pipes
# Flow Control Drain Grit Two Inlets
L_EtFlowControlComponents := 2*MaleAdapterLength(ND_EtFlowControl) + ValveLength(ND_EtFlowControl) - 2*ValveSocket(ND_EtFlowControl) + SocketDepth(ND_EtFlowControl) + ElbowRadius(ND_EtFlowControl)
Z_EtFlowControl := max(Z_Walkway + ConRadius(ND_EtFlowControl), Et_Origin[2] - H_EtDC - T_PlantWall + ConRadius(ND_EtFlowControl) + 2*ElbowRadius(ND_EtFlowControl) + 2*SocketDepth(ND_EtFlowControl)) = 1.6882 m
EtFlowControlPipeLayer := layer_new("EtFlowControlPipePlu", blue)
L_EtFlowControlHorizPipe1 := SocketDepth(ND_EtFlowControl) + T_PlantWall
L_EtFlowControlHorizPipe2 := SocketDepth(ND_EtFlowControl) + T_PlantWall + 2*MaleAdapterLength(ND_EtFlowControl) + ValveLength(ND_EtFlowControl) - 2*ValveSocket(ND_EtFlowControl)
EtFlowControlHorizPipe1_Origin :=
    if EN_TwoInlets == 1
        [
            Et_Origin[0] + T_PlantWall + SocketDepth(ND_EtFlowControl);
            Et_Origin[1] + L_EtHopperFront + ConRadius(ND_EtDrain) + S_Fitting;
            Z_EtFlowControl
        ]
    otherwise
        [
            Et_Origin[0] + T_PlantWall + SocketDepth(ND_EtFlowControl);
            Et_Origin[1] + L_EtHopperFront*5/4 + ConRadius(ND_EtDrain) + S_Fitting;
            Z_EtFlowControl
        ]
EtFlowControlHorizPipe1L_Origin := EtFlowControlHorizPipe1_Origin + [0 m; (2*S_Fitting + 2*T_EtRemovableWallSupport) + T_EtRemovableWall + 2*ConRadius(ND_EtDrain); 0 m]
EtFlowControlHorizPipe1 := PipeSUBFtrial(EtFlowControlHorizPipe1_Origin, L_EtFlowControlHorizPipe1, [0; 0; 0]*deg, ND_EtFlowControl, PS_Default, ["EtCon"])
EtFlowControlHorizPipe1L := PipeSUBFtrial(EtFlowControlHorizPipe1L_Origin, L_EtFlowControlHorizPipe1, [0; 0; 0]*deg, ND_EtFlowControl, PS_Default, ["EtCon"])
EtFlowControlHorizPipe2 := PipeSUBFtrial([
    Et_Origin[0] + L_EtFlowControlHorizPipe2;
    EtFlowControlHorizPipe1_Origin[1];
    min(Et_Origin[2] - T_PlantWall - ConRadius(ND_EtFlowControl), Z_EtFlowControl - 2*ElbowRadius(ND_EtFlowControl) - 2*SocketDepth(ND_EtFlowControl))
], L_EtFlowControlHorizPipe2, [0; 0; 0]*deg, ND_EtFlowControl, PS_Default, ["EtCon"])
EtFlowControlHorizPipe2L := PipeSUBFtrial([
    Et_Origin[0] + L_EtFlowControlHorizPipe2;
    EtFlowControlHorizPipe1L_Origin[1];
    min(Et_Origin[2] - T_PlantWall - ConRadius(ND_EtFlowControl), Z_EtFlowControl - 2*ElbowRadius(ND_EtFlowControl) - 2*SocketDepth(ND_EtFlowControl))
], L_EtFlowControlHorizPipe2, [0; 0; 0]*deg, ND_EtFlowControl, PS_Default, ["EtCon"])
EtFlowControlNipple1 := PipeFtrial([
    Et_Origin[0] + T_PlantWall + SocketDepth(ND_EtFlowControl) + 2*MaleAdapterLength(ND_EtFlowControl) + ValveLength(ND_EtFlowControl) - 2*ValveSocket(ND_EtFlowControl);
    EtFlowControlHorizPipe1_Origin[1];
    Z_EtFlowControl
], 2*SocketDepth(ND_EtFlowControl), [0; 0; 0]*deg, ND_EtFlowControl, PS_Default)
EtFlowControlNipple1L := PipeFtrial([
    Et_Origin[0] + T_PlantWall + SocketDepth(ND_EtFlowControl) + 2*MaleAdapterLength(ND_EtFlowControl) + ValveLength(ND_EtFlowControl) - 2*ValveSocket(ND_EtFlowControl);
    EtFlowControlHorizPipe1L_Origin[1];
    Z_EtFlowControl
], 2*SocketDepth(ND_EtFlowControl), [0; 0; 0]*deg, ND_EtFlowControl, PS_Default)
L_EtFlowControlVert := Z_EtFlowControl - min(Et_Origin[2] - T_PlantWall - ConRadius(ND_EtFlowControl), Z_EtFlowControl - 2*ElbowRadius(ND_EtFlowControl) - 2*SocketDepth(ND_EtFlowControl)) - 2*ElbowRadius(ND_EtFlowControl) = 0.114 m
EtFlowControlVertPipe_Origin := [
    Et_Origin[0] + T_PlantWall + SocketDepth(ND_EtFlowControl) + 2*MaleAdapterLength(ND_EtFlowControl) + ValveLength(ND_EtFlowControl) - 2*ValveSocket(ND_EtFlowControl) + ElbowRadius(ND_EtFlowControl);
    EtFlowControlHorizPipe1_Origin[1];
    Z_EtFlowControl - ElbowRadius(ND_EtFlowControl)
]
EtFlowControlVertPipe := PipeFtrial(EtFlowControlVertPipe_Origin, L_EtFlowControlVert, [0; 270]*deg, ND_EtFlowControl, PS_Default)
EtFlowControlVertPipeL_Origin := [
    Et_Origin[0] + T_PlantWall + SocketDepth(ND_EtFlowControl) + 2*MaleAdapterLength(ND_EtFlowControl) + ValveLength(ND_EtFlowControl) - 2*ValveSocket(ND_EtFlowControl) + ElbowRadius(ND_EtFlowControl);
    EtFlowControlHorizPipe1L_Origin[1];
    Z_EtFlowControl - ElbowRadius(ND_EtFlowControl)
]
EtFlowControlVertPipeL := PipeFtrial(EtFlowControlVertPipeL_Origin, L_EtFlowControlVert, [0; 270]*deg, ND_EtFlowControl, PS_Default)
EtFlowControlFittingLayer := layer_new("EtFlowControlFittingPlu", green)
EtFlowControlElbow1 := ElbowF([
    EtFlowControlVertPipe_Origin[0] - ElbowRadius(ND_EtFlowControl);
    EtFlowControlHorizPipe1_Origin[1];
    min(Et_Origin[2] - T_PlantWall - ConRadius(ND_EtFlowControl), Z_EtFlowControl - 2*ElbowRadius(ND_EtFlowControl) - 2*SocketDepth(ND_EtFlowControl))
], [-90; 0; 90]*deg, ND_EtFlowControl, PS_Default)
EtFlowControlElbow2 := ElbowF([
    EtFlowControlVertPipe_Origin[0] - ElbowRadius(ND_EtFlowControl);
    EtFlowControlHorizPipe1_Origin[1];
    Z_EtFlowControl
], [-90; 0; -90]*deg, ND_EtFlowControl, PS_Default)
EtFlowControlElbow1L := ElbowF([
    EtFlowControlVertPipe_Origin[0] - ElbowRadius(ND_EtFlowControl);
    EtFlowControlHorizPipe1L_Origin[1];
    min(Et_Origin[2] - T_PlantWall - ConRadius(ND_EtFlowControl), Z_EtFlowControl - 2*ElbowRadius(ND_EtFlowControl) - 2*SocketDepth(ND_EtFlowControl))
], [-90; 0; 90]*deg, ND_EtFlowControl, PS_Default)
EtFlowControlElbow2L := ElbowF([
    EtFlowControlVertPipe_Origin[0] - ElbowRadius(ND_EtFlowControl);
    EtFlowControlHorizPipe1L_Origin[1];
    Z_EtFlowControl
], [-90; 0; -90]*deg, ND_EtFlowControl, PS_Default)
EtFlowControlAdapterLayer := layer_new("EtFlowControlAdapterPlu", blue3)
EtFlowControlAdapter1 := MaleAdapterF([EtFlowControlHorizPipe1_Origin[0]; EtFlowControlHorizPipe1_Origin[1]; Z_EtFlowControl], [180; 0]*deg, ND_EtFlowControl, PS_Default)
EtFlowControlAdapter2 := MaleAdapterF([
    Et_Origin[0] + T_PlantWall + 2*MaleAdapterLength(ND_EtFlowControl) + ValveLength(ND_EtFlowControl) - 2*ValveSocket(ND_EtFlowControl) - SocketDepth(ND_EtFlowControl);
    EtFlowControlHorizPipe1_Origin[1];
    Z_EtFlowControl
], [0; 0]*deg, ND_EtFlowControl, PS_Default)
EtFlowControlAdapter1L := MaleAdapterF([EtFlowControlHorizPipe1_Origin[0]; EtFlowControlHorizPipe1L_Origin[1]; Z_EtFlowControl], [180; 0]*deg, ND_EtFlowControl, PS_Default)
EtFlowControlAdapter2L := MaleAdapterF([
    Et_Origin[0] + T_PlantWall + 2*MaleAdapterLength(ND_EtFlowControl) + ValveLength(ND_EtFlowControl) - 2*ValveSocket(ND_EtFlowControl) - SocketDepth(ND_EtFlowControl);
    EtFlowControlHorizPipe1L_Origin[1];
    Z_EtFlowControl
], [0; 0]*deg, ND_EtFlowControl, PS_Default)
EtFlowControlValveLayer := layer_new("EtFlowControlValvePlu", blue2)
EtFlowControlValve := insertdwg("https://confluence.cornell.edu/download/attachments/173604905/Et-Scaled-Gate-Valve-Threaded.dwg", [
    EtFlowControlHorizPipe1_Origin[0] - SocketDepth(ND_EtFlowControl) + MaleAdapterLength(ND_EtFlowControl) - ValveSocket(ND_EtFlowControl) + ValveLength(ND_EtFlowControl);
    EtFlowControlHorizPipe1_Origin[1];
    Z_EtFlowControl
], 2*outerradius(ND_EtFlowControl)/(1.16 m), 2*outerradius(ND_EtFlowControl)/(1.16 m), 0 deg)
EtFlowControlValveL := insertdwg("https://confluence.cornell.edu/download/attachments/173604905/Et-Scaled-Gate-Valve-Threaded.dwg", [
    EtFlowControlHorizPipe1_Origin[0] - SocketDepth(ND_EtFlowControl) + MaleAdapterLength(ND_EtFlowControl) - ValveSocket(ND_EtFlowControl) + ValveLength(ND_EtFlowControl);
    EtFlowControlHorizPipe1L_Origin[1];
    Z_EtFlowControl
], 2*outerradius(ND_EtFlowControl)/(1.16 m), 2*outerradius(ND_EtFlowControl)/(1.16 m), 0 deg)
FlowControlScript2 := stack(EtFlowControlPipeLayer, getPipeDraw(EtFlowControlHorizPipe1), getPipeDraw(EtFlowControlHorizPipe1L), getPipeDraw(EtFlowControlHorizPipe2), getPipeDraw(EtFlowControlHorizPipe2L), getPipeDraw(EtFlowControlNipple1), getPipeDraw(EtFlowControlNipple1L), getPipeDraw(EtFlowControlVertPipe), getPipeDraw(EtFlowControlVertPipeL), FreezeLayer("EtFlowControlPipePlu"), EtFlowControlFittingLayer, EtFlowControlElbow1, EtFlowControlElbow1L, EtFlowControlElbow2, EtFlowControlElbow2L, FreezeLayer("EtFlowControlFittingPlu"), EtFlowControlAdapterLayer, EtFlowControlAdapter1, EtFlowControlAdapter1L, EtFlowControlAdapter2, EtFlowControlAdapter2L, FreezeLayer("EtFlowControlAdapterPlu"), EtFlowControlValveLayer, EtFlowControlValve, EtFlowControlValveL, FreezeLayer("EtFlowControlValvePlu"))
PMatDummy := getPipeDat(PMat, EtFlowControlHorizPipe1)
PMatDummy := getPipeDat(PMat, EtFlowControlHorizPipe1L)
PMatDummy := getPipeDat(PMat, EtFlowControlHorizPipe2)
PMatDummy := getPipeDat(PMat, EtFlowControlHorizPipe2L)
PMatDummy := getPipeDat(PMat, EtFlowControlNipple1)
PMatDummy := getPipeDat(PMat, EtFlowControlNipple1L)
PMatDummy := getPipeDat(PMat, EtFlowControlVertPipe)
PMatDummy := getPipeDat(PMat, EtFlowControlVertPipeL)
# Flow Control Drain No Grit | simple loop for 1 to 3 pipes
EtFlowControlCoupling_Origin := [-L_Et - SocketDepth(ND_EtFlowControl); ConRadius(ND_EtFlowControl); 0] + Et_Origin
L_EtFlowControlPipe := max(T_PlantWall - CouplingLength(ND_EtFlowControl), 0) + 2*SocketDepth(ND_EtFlowControl) + S_Fitting
EtFlowControlAdapter1_Origin := [-L_EtFlowControlPipe + SocketDepth(ND_EtFlowControl); 0; 0] + EtFlowControlCoupling_Origin
EtFlowControlValve_Origin := [
    -MaleAdapterLength(ND_EtFlowControl) + SocketDepth(ND_EtFlowControl) + ValveSocket(ND_EtFlowControl);
    0;
    0
] + EtFlowControlAdapter1_Origin
EtFlowControlAdapter2_Origin := [
    -ValveLength(ND_EtFlowControl) + ValveSocket(ND_EtFlowControl) - MaleAdapterLength(ND_EtFlowControl) + SocketDepth(ND_EtFlowControl);
    0;
    0
] + EtFlowControlValve_Origin
EtFlowControlElbow_Origin := [-2*SocketDepth(ND_EtFlowControl); 0; 0] + EtFlowControlAdapter2_Origin
EtFlowControlFittingLayer := layer_new("EtFlowControlFittingPlu", green)
EtFlowControlCoupling := CouplingSUBF(EtFlowControlCoupling_Origin, [0; 0], ND_EtFlowControl, PS_Default, ["EtCon"])
EtFlowControlAdapter1 := MaleAdapterF(EtFlowControlAdapter1_Origin, [0; 0], ND_EtFlowControl, PS_Default)
EtFlowControlValve := insertdwg("https://confluence.cornell.edu/download/attachments/173604905/Et-Scaled-Gate-Valve-Threaded.dwg", EtFlowControlValve_Origin, 2*outerradius(ND_EtFlowControl)/(1.16 m), 2*outerradius(ND_EtFlowControl)/(1.16 m), 0 deg)
EtFlowControlAdapter2 := MaleAdapterF(EtFlowControlAdapter2_Origin, [180; 0]*deg, ND_EtFlowControl, PS_Default)
EtFlowControlElbow := ElbowF(EtFlowControlElbow_Origin, [90; 0; 90]*deg, ND_EtFlowControl, PS_Default)
EtFlowControlFittingsFrz := FreezeLayer("EtFlowControlFittingsPlu")
EtFlowControlFittings :=
    stack(EtFlowControlFittingLayer, EtFlowControlCoupling, EtFlowControlAdapter1, EtFlowControlValve, EtFlowControlFittingsFrz) if Z_Walkway ≤ Z_Et
    stack(EtFlowControlFittingLayer, EtFlowControlCoupling, EtFlowControlAdapter1, EtFlowControlValve, EtFlowControlAdapter2, EtFlowControlElbow, EtFlowControlFittingsFrz) otherwise
EtFlowControlPipeLayer := layer_new("EtFlowControlPipePlu", blue)
EtFlowControlPipe := PipeSUBFtrial(EtFlowControlCoupling_Origin + [-CouplingLength(ND_EtFlowControl) + 2*SocketDepth(ND_EtFlowControl); 0; 0], L_EtFlowControlPipe, [0; 0], ND_EtFlowControl, PS_Default, ["EtCon"])
L_EtFlowControlNipple := 2*SocketDepth(ND_EtFlowControl)
EtFlowControlNipple := PipeFtrial(EtFlowControlAdapter2_Origin, L_EtFlowControlNipple, [0; 0], ND_EtFlowControl, PS_Default)
L_EtFlowControlVertPipe := Z_Et - Z_Walkway + SocketDepth(ND_EtFlowControl)
EtFlowControlVertPipe := PipeFtrial(EtFlowControlElbow_Origin + [-ElbowRadius(ND_EtFlowControl); 0; -ElbowRadius(ND_EtFlowControl)], L_EtFlowControlVertPipe, [0; 90]*deg, ND_EtFlowControl, PS_Default)
EtFlocControlPipeFrz := FreezeLayer("EtFlowControlPipePlu")
EtFlowControlPipes :=
    stack(EtFlowControlPipeLayer, getPipeDraw(EtFlowControlPipe), EtFlocControlPipeFrz) if Z_Walkway ≤ Z_Et
    stack(EtFlowControlPipeLayer, getPipeDraw(EtFlowControlPipe), getPipeDraw(EtFlowControlNipple), getPipeDraw(EtFlowControlVertPipe), EtFlocControlPipeFrz) otherwise
PMat :=
    PMat ← getPipeDat(PMat, EtFlowControlPipe) if Z_Walkway ≤ Z_Et
    otherwise
        PMat ← getPipeDat(PMat, EtFlowControlPipe)
        PMat ← getPipeDat(PMat, EtFlowControlNipple)
        PMat ← getPipeDat(PMat, EtFlowControlVertPipe)
FlowControlScript1 := stack(EtFlowControlFittings, EtFlowControlPipes)
# one pipe
# Inlet Pipe
EtInletElbow_Origin0 := Et_Origin + [
    0 m;
    L_EtFrontToOverflowWeir + ConRadius(ND_EtOverflowDrain) + S_Fitting + ConRadius(ND_EtInlet);
    H_Et + ConRadius(ND_EtInlet)
]
EtInletElbow_Origin1 := Et_Origin + [
    ElbowRadius(ND_EtInlet) - S_Fitting - ConRadius(ND_EtInlet);
    0.5*W_Et;
    H_Et + ConRadius(ND_EtInlet) + ElbowRadius(ND_EtInlet) - SocketDepth(ND_EtInlet)
]
EtInletElbow_Origin2 := Et_Origin + [ConRadius(ND_EtInlet); ConRadius(ND_EtInlet) + S_Fitting; H_Et + ConRadius(ND_EtInlet)]
EtInletElbow_Origin :=
    EtInletElbow_Origin0 if EN_EtGrit == 0 and EN_DoubleTrain == 0
    EtInletElbow_Origin2 if EN_DoubleTrain == 1
    EtInletElbow_Origin1 otherwise
EtInletPipeLayer := layer_new("EtInletPipePlu", blue)
EtInletFittingLayer := layer_new("EtInletFittingPlu", green)
ND_EtInlet = 0.1524 m
EtInletElbow := ElbowF(EtInletElbow_Origin, [90; 0; 90]*deg, ND_EtInlet, PS_Default)
L_EtInletPipe := 1 m
EtInletPipe := PipeFtrial(EtInletElbow_Origin + [L_EtInletPipe; 0; 0], L_EtInletPipe, [0; 0; 0]*deg, ND_EtInlet, PS_Default)
FreezeEtInletPipe := FreezeLayer("EtInletPipePlu")
FreezeEtInletFittings := FreezeLayer("EtInletFittingPlu")
EtInletScript := stack(EtInletFittingLayer, EtInletElbow, FreezeEtInletFittings, EtInletPipeLayer, getPipeDraw(EtInletPipe), FreezeEtInletPipe)
PMat := getPipeDat(PMat, EtInletPipe)
# Inlet Pipe Two Inlets | two pipes
EtInletElbow_Origin0 := Et_Origin + [
    0 m;
    L_EtFrontToOverflowWeir + ConRadius(ND_EtOverflowDrain) + S_Fitting + ConRadius(ND_EtInlet);
    H_Et + ConRadius(ND_EtInlet)
]
EtInletElbow_Origin0 := Et_Origin + [
    0 m;
    L_EtHopperFront + 4*ConRadius(ND_EtDrain) + 4*S_Fitting + ConRadius(ND_EtInlet) + T_EtRemovableWall + 2*T_EtRemovableWallSupport;
    H_Et + ConRadius(ND_EtInlet)
]
# Starts after flat on bottom of hopper on back side
# New Back Inlet Origin
# No longer involves OFW
EtInletElbow_Origin1 := Et_Origin + [
    ElbowRadius(ND_EtInlet) - S_Fitting - ConRadius(ND_EtInlet);
    0.5*W_Et;
    H_Et + ConRadius(ND_EtInlet) + ElbowRadius(ND_EtInlet) - SocketDepth(ND_EtInlet)
]
EtInletElbow_Origin :=
    EtInletElbow_Origin0 if EN_EtGrit == 0
    EtInletElbow_Origin1 otherwise
EtInletElbow2_Origin := Et_Origin + [
    0 m;
    (ConRadius(ND_EtOverflowDrain) + S_Fitting + ConRadius(ND_EtInlet));
    H_Et + ConRadius(ND_EtInlet)
]
# New Front Inlet Origin
EtInletElbow2_Origin := Et_Origin + [0 m; L_EtHopperFront + (-ConRadius(ND_EtOverflowDrain)); H_Et + ConRadius(ND_EtInlet)]
EtInletPipeLayer := layer_new("EtInletPipePlu", blue)
EtInletFittingLayer := layer_new("EtInletFittingPlu", green)
ND_EtInlet = 0.1524 m
EtInletElbow := ElbowF(EtInletElbow_Origin, [90; 0; 90]*deg, ND_EtInlet, PS_Default)
EtInletElbow2 := ElbowF(EtInletElbow2_Origin, [90; 0; 90]*deg, ND_EtInlet, PS_Default)
L_EtInletPipe := 1 m
EtInletPipe := PipeFtrial(EtInletElbow_Origin + [L_EtInletPipe; 0; 0], L_EtInletPipe, [0; 0; 0]*deg, ND_EtInlet, PS_Default)
EtInletPipe2 := PipeFtrial(EtInletElbow2_Origin + [L_EtInletPipe; 0; 0], L_EtInletPipe, [0; 0; 0]*deg, ND_EtInlet, PS_Default)
FreezeEtInletPipe := FreezeLayer("EtInletPipePlu")
FreezeEtInletFittings := FreezeLayer("EtInletFittingPlu")
EtInletScript2 := stack(EtInletFittingLayer, EtInletElbow, EtInletElbow2, FreezeEtInletFittings, EtInletPipeLayer, getPipeDraw(EtInletPipe), getPipeDraw(EtInletPipe2), FreezeEtInletPipe)
PMatDummy := getPipeDat(PMat, EtInletPipe)
PMatDummy := getPipeDat(PMat, EtInletPipe2)
# no pipes
# Add Water Levels
EtWaterLayer := layer_new("EtWater", blue2)
EtWater := BoxF(Et_Origin, [Et_Origin[0] - L_Et; Et_Origin[1] + W_Et; ZW_Et], [0; 0; 0]*deg)
EtRMPipeWater := CylinderF(RMElbow_Origin + [0; ElbowRadius(ND_RMPipe); ElbowRadius(ND_RMPipe)], innerdiameter(ND_RMPipe, PS_Default)/2, ZW_RMPipe - RMElbow_Origin[2] - ElbowRadius(ND_RMPipe), [0; 90]*deg)
EtWaterFrz := FreezeLayer("EtWater")
EtWaterScript := stack(EtWaterLayer, EtWater, EtRMPipeWater, EtWaterFrz)
# The pipes which are used very much depend on these conditions. Therefore, the pipe matrix cannot be added to until the last step.
AC_EntranceTank :=
    stack(EtTankScript, EtTrashRackScript, EtOverflowPluScript0, EtDrainsRight, RMScript, FlowControlScript0, EtInletScript) if EN_EtGrit == 0 and EN_TwoInlets == 0 and EN_LfomPipe == 1
    stack(EtTankScript2, EtTrashRackScript, EtOverflowPluScript2, EtDrainsRight2Inlets, RMScript, FlowControlScript2, EtInletScript2) if EN_EtGrit == 0 and EN_TwoInlets == 1 and EN_LfomPipe == 1
    stack(EtTankScript, ModificationScript, EtTrashRackScript, EtOverflowPluScript0, EtDrainsRight, LfomChannelScript, FlowControlScript0, EtInletScript) if EN_EtGrit == 0 and EN_LfomPipe == 0 and EN_TwoInlets == 0
    stack(EtTankScript2, ModificationScript, EtTrashRackScript, EtOverflowPluScript2, EtDrainsRight2Inlets, LfomChannelScript, FlowControlScript2, EtInletScript2) if EN_EtGrit == 0 and EN_LfomPipe == 0 and EN_TwoInlets == 1
    stack(EtTankScript, EtOverflowPluScript1, RMScript, FlowControlScript1, EtInletScript) otherwise
# Log of pipe scripts and the pipes they contain:
# Rapid Mix Pipe, LFOM, and Orifice Plate
# RMScript
# RMHorizPipe
# RMVertPipe
# RMAirRelease
# Hopper Drains
# DrainPipes -- complicated
# StopperPipes - complicated
#
# FirstStopper
# Hopper Drains Two Inlets
# DrainPipe.0
# DrainPipe.1
# DrainPipes - complicated
#
# FirstStopper.0
# FirstStopper.1
# StopperPipes
# Overflow Drain Grit
# EtOverflowPluScript0
# EtChannelPipe1
# ETChannelPipe2
# ETOverflowPipeVert
# Overflow Drain Grit Two Inlets
# EtOverflowPluScript2
# EtChannelPipe1
# EtChannelPipe2
# EtOverflowPipeVert
# Overflow Drain No Grit
# EtOverflowPluScript1
# EtOverflowNipple
# EtOverflowVertPipe
# EtOverflowHorizPipe1
# EtOverflowHorizPipe2
# Flow Control Drain Grit
# FlowControlScript0
# EtFlowControlHorizPipe1
# EtFlowControlHorizPipe2
# EtFlowControlNipple1
# EtFlowControlVertPipe
# Flow Control Drain Grit Two Inlets
# FlowControlScript2
# EtFlowControlHorizPipe1
# EtFlowControlHorizPipe1L
# EtFlowControlHorizPipe2
# EtFlowControlHorizPipe2L
# EtFlowControlNipple1
# EtFlowControlNipple1L
# EtFlowControlVertPipe
# EtFlowControlVertPipeL
# Flow Control Drain No Grit
# EtFlowControlPipes
# EtFlowControlPipe
# EtFlowControlNipple
# EtFlowControlVertPipe
# Inlet Pipe
# EtInletScript
# EtInletPipe
# Inlet Pipe Two Inlets
# EtInletScript2
# EtInletPipe
# EtInletPipe2
AC_EntranceTankWater :=
    stack(EtTankScript, EtTrashRackScript, EtOverflowPluScript0, EtDrainsRight, RMScript, FlowControlScript0, EtInletScript, EtWaterScript) if EN_EtGrit == 0 and EN_TwoInlets == 0 and EN_LfomPipe == 1
    stack(EtTankScript2, EtTrashRackScript, EtOverflowPluScript2, EtDrainsRight2Inlets, RMScript, FlowControlScript2, EtInletScript2, EtWaterScript) if EN_EtGrit == 0 and EN_TwoInlets == 1 and EN_LfomPipe == 1
    stack(EtTankScript, ModificationScript, EtTrashRackScript, EtOverflowPluScript0, EtDrainsRight, LfomChannelScript, FlowControlScript0, EtInletScript, EtWaterScript) if EN_EtGrit == 0 and EN_LfomPipe == 0 and EN_TwoInlets == 0
    stack(EtTankScript2, ModificationScript, EtTrashRackScript, EtOverflowPluScript2, EtDrainsRight2Inlets, LfomChannelScript, FlowControlScript2, EtInletScript2, EtWaterScript) if EN_EtGrit == 0 and EN_LfomPipe == 0 and EN_TwoInlets == 1
    stack(EtTankScript, EtOverflowPluScript1, RMScript, FlowControlScript1, EtInletScript, EtWaterScript) otherwise
# Attempt to copy the conditions for everything into the final Pipe Matrix
AC_EntranceTank :=
    AC_EntranceTank if EN_Water == 0
    AC_EntranceTankWater otherwise
PMat :=
    k ← PMat
    if EN_Water == 0
        if EN_EtGrit == 0 and EN_TwoInlets == 0 and EN_LfomPipe == 1
            k ← getPipeDat(k, RMHorizPipe)
            k ← getPipeDat(k, RMVertPipe)
            k ← getPipeDat(k, RMAirRelease)
            k ← getPipeDat(k, EtFlowControlHorizPipe1)
        stack(EtTankScript2, EtTrashRackScript, EtOverflowPluScript2, EtDrainsRight2Inlets, RMScript, FlowControlScript2, EtInletScript2) if EN_EtGrit == 0 and EN_TwoInlets == 1 and EN_LfomPipe == 1
        stack(EtTankScript, ModificationScript, EtTrashRackScript, EtOverflowPluScript0, EtDrainsRight, LfomChannelScript, FlowControlScript0, EtInletScript) if EN_EtGrit == 0 and EN_LfomPipe == 0 and EN_TwoInlets == 0
        stack(EtTankScript2, ModificationScript, EtTrashRackScript, EtOverflowPluScript2, EtDrainsRight2Inlets, LfomChannelScript, FlowControlScript2, EtInletScript2) if EN_EtGrit == 0 and EN_LfomPipe == 0 and EN_TwoInlets == 1
        stack(EtTankScript, EtOverflowPluScript1, RMScript, FlowControlScript1, EtInletScript) otherwise
    otherwise
        stack(EtTankScript, EtTrashRackScript, EtOverflowPluScript0, EtDrainsRight, RMScript, FlowControlScript0, EtInletScript, EtWaterScript) if EN_EtGrit == 0 and EN_TwoInlets == 0 and EN_LfomPipe == 1
        stack(EtTankScript2, EtTrashRackScript, EtOverflowPluScript2, EtDrainsRight2Inlets, RMScript, FlowControlScript2, EtInletScript2, EtWaterScript) if EN_EtGrit == 0 and EN_TwoInlets == 1 and EN_LfomPipe == 1
        stack(EtTankScript, ModificationScript, EtTrashRackScript, EtOverflowPluScript0, EtDrainsRight, LfomChannelScript, FlowControlScript0, EtInletScript, EtWaterScript) if EN_EtGrit == 0 and EN_LfomPipe == 0 and EN_TwoInlets == 0
        stack(EtTankScript2, ModificationScript, EtTrashRackScript, EtOverflowPluScript2, EtDrainsRight2Inlets, LfomChannelScript, FlowControlScript2, EtInletScript2, EtWaterScript) if EN_EtGrit == 0 and EN_LfomPipe == 0 and EN_TwoInlets == 1
        stack(EtTankScript, EtOverflowPluScript1, RMScript, FlowControlScript1, EtInletScript, EtWaterScript) otherwise  # error: This placeholder is empty.
# [component: inputs AC_EntranceTank]
