# Calculating Lances:
L_Lance := 6.1 m
L_LanceBuffer := 0.60 m  # Completed code  # Incomplete code
L_UsableLance := L_Lance - L_LanceBuffer  # Completed code, could be improved
# Test code | Established Inputs
ZeroFunction(i, j) := 0
RemoveInitializingZeroRow(Matrix) :=
    if rows(Matrix) > 1
        NewMatrix ← matrix(rows(Matrix) - 1, rows(transpose(Matrix)), ZeroFunction)
        for i ∈ 1 .. rows(Matrix) - 1
            for j ∈ 0 .. rows(transpose(Matrix)) - 1
                NewMatrix[:, j][i - 1] ← Matrix[:, j][i]
    NewMatrix ← Matrix otherwise
    return NewMatrix
# The function RemoveInitializingZeroRow (which uses ZeroFunction) will remove the first row in a matrix that contains only zeros and will be used many times in the following functions. This row is usually there because the stack function requires multiple matrices as input even if you have only one, but the local definition arrow ends up creating matrices within matrices.
RemoveZeroLengths(Matrix) :=
    n ← 0
    NoZerosMatrix ← [0, 0, 0, 0]
    for i ∈ 0 .. rows(Matrix) - 1
        if Matrix[:, 0][i] ≠ 0
            NoZerosMatrix ← stack(NoZerosMatrix, transpose(transpose(Matrix)[:, i]))
            n ← n + 1
    return RemoveInitializingZeroRow(NoZerosMatrix)
# RemoveZeroLengths will remove rows in the PipeMatrix with a length of zero (the first column of PipeMatrix corresponds with length), since that means there is technically no pipe to go along with those specifications.
# Length | ND | EN | N
PipeMatrix := [
    2, 5, 5, 6;
    1, 2, 2, 4;
    33, 2, 1, 65;
    1, 3, 2, 5;
    6, 1, 3, 3;
    4, 5, 5, 32;
    3, 2, 8, 65;
    4, 3, 1, 21;
    4, 4, 8, 4;
    6, 4, 6, 35;
    33, 2, 1, 21;
    5, 5, 5, 41;
    5, 1, 1, 2;
    10, 6, 4, 4;
    2, 5, 5, 8;
    2, 5, 5, 9;
    1, 2, 2, 5;
    1, 2, 2, 6;
    3, 5, 5, 7;
    4, 5, 5, 8;
    6, 5, 5, 9;
    5, 2, 2, 2;
    4, 2, 2, 6;
    8, 6, 4, 5;
    4, 6, 4, 6;
    9.5, 6, 4, 5;
    9.5, 6, 4, 5;
    1, 3, 2, 8;
    10, 5, 6, 6;
    4.5, 6, 4, 1
]*m
CombineLengths(PipeMatrix) :=
    CombinedMatrix ← transpose(transpose(PipeMatrix)[:, 0])
    TempMatrix ← [0, 0, 0, 0]
    for i ∈ 0 .. rows(PipeMatrix) - 2
        j ← i + 1
        if PipeMatrix[:, 0][i] == PipeMatrix[:, 0][j] and PipeMatrix[:, 1][i] == PipeMatrix[:, 1][j] and PipeMatrix[:, 2][i] == PipeMatrix[:, 2][j]
            CombinedMatrix[:, 3][rows(CombinedMatrix) - 1] ← CombinedMatrix[:, 3][rows(CombinedMatrix) - 1] + PipeMatrix[:, 3][j] if PipeMatrix[:, 0][j] == CombinedMatrix[:, 0][rows(CombinedMatrix) - 1] and PipeMatrix[:, 1][j] == CombinedMatrix[:, 1][rows(CombinedMatrix) - 1] and PipeMatrix[:, 2][j] == CombinedMatrix[:, 2][rows(CombinedMatrix) - 1]
            otherwise
                TempMatrix ← transpose(transpose(PipeMatrix)[:, j])
                TempMatrix[:, 3] ← PipeMatrix[:, 3][i] + PipeMatrix[:, 3][j]
                CombinedMatrix ← stack(CombinedMatrix, TempMatrix)
        CombinedMatrix ← stack(CombinedMatrix, transpose(transpose(PipeMatrix)[:, j])) otherwise
    return CombinedMatrix
# The code CombineLengths combines pipes with same length, ND and EN. All rows with the same specs but one are eliminated and the number of pipes (fourth column) are added together to make the code easier to handle.
#
# The code only works for rows next to each other; the code will be called again later to further consolidate similar rows.
# The original pipe matrix is sorted by length first before being combined
CombinedLengths := CombineLengths(csort(PipeMatrix, 0)) = [
    1, 2, 2, 4;
    1, 3, 2, 13;
    1, 2, 2, 11;
    2, 5, 5, 23;
    3, 2, 8, 65;
    3, 5, 5, 7;
    4, 6, 4, 6;
    4, 5, 5, 32;
    4, 2, 2, 6;
    4, 5, 5, 8;
    4, 4, 8, 4;
    4, 3, 1, 21;
    4.5, 6, 4, 1;
    5, 1, 1, 2;
    5, 5, 5, 41;
    5, 2, 2, 2;
    6, 1, 3, 3;
    6, 5, 5, 9;
    6, 4, 6, 35;
    8, 6, 4, 5;
    9.5, 6, 4, 10;
    10, 5, 6, 6;
    10, 6, 4, 4;
    33, 2, 1, 86
] m
LongPipes(PipeMatrix) :=
    n ← 0
    LongPipesMatrix ← [0, 0, 0, 0]
    for i ∈ 0 .. rows(PipeMatrix) - 1
        if PipeMatrix[:, 0][i] > L_UsableLance
            LongPipesMatrix ← stack(LongPipesMatrix, transpose(transpose(PipeMatrix)[:, i]))
            PipeMatrix[:, 0][i] ← 0
            n ← n + 1
    return [RemoveInitializingZeroRow(LongPipesMatrix); RemoveZeroLengths(PipeMatrix)]
# The function LongPipesMatrix will take the initial PipeMatrix and separate it into two matrices:
# 1) LongPipesMatrix will contain all rows (pipes) that have lengths longer than that of the useable lance.
# 2) ShortPipesMatrix is the remaining rows left in in the original PipeMatrix
TestMatrix := LongPipes(CombinedLengths) = [
    [
        6, 1, 3, 3;
        6, 5, 5, 9;
        6, 4, 6, 35;
        8, 6, 4, 5;
        9.5, 6, 4, 10;
        10, 5, 6, 6;
        10, 6, 4, 4;
        33, 2, 1, 86
    ];
    [
        1, 2, 2, 4;
        1, 3, 2, 13;
        1, 2, 2, 11;
        2, 5, 5, 23;
        3, 2, 8, 65;
        3, 5, 5, 7;
        4, 6, 4, 6;
        4, 5, 5, 32;
        4, 2, 2, 6;
        4, 5, 5, 8;
        4, 4, 8, 4;
        4, 3, 1, 21;
        4.5, 6, 4, 1;
        5, 1, 1, 2;
        5, 5, 5, 41;
        5, 2, 2, 2
    ]
] m
LongPipesTest := TestMatrix[0] = [
    6, 1, 3, 3;
    6, 5, 5, 9;
    6, 4, 6, 35;
    8, 6, 4, 5;
    9.5, 6, 4, 10;
    10, 5, 6, 6;
    10, 6, 4, 4;
    33, 2, 1, 86
] m
ShortPipesTest := TestMatrix[1] = [
    1, 2, 2, 4;
    1, 3, 2, 13;
    1, 2, 2, 11;
    2, 5, 5, 23;
    3, 2, 8, 65;
    3, 5, 5, 7;
    4, 6, 4, 6;
    4, 5, 5, 32;
    4, 2, 2, 6;
    4, 5, 5, 8;
    4, 4, 8, 4;
    4, 3, 1, 21;
    4.5, 6, 4, 1;
    5, 1, 1, 2;
    5, 5, 5, 41;
    5, 2, 2, 2
] m
DivideMatrixND(PipeMatrix) :=
    n ← 0
    TempMatrix ← [0, 0, 0, 0]
    MatrixUse ← csort(PipeMatrix, 1)
    for i ∈ 1 .. rows(MatrixUse) - 1
        if i == 1
            TempMatrix ← stack(TempMatrix, transpose(transpose(MatrixUse)[:, i - 1]))
            TempMatrix ← stack(TempMatrix, transpose(transpose(MatrixUse)[:, i - 1])) if MatrixUse[:, 1][i] == MatrixUse[:, 1][i - 1]
            otherwise
                NDDividedMatrix[n] ← RemoveInitializingZeroRow(TempMatrix)
                n ← n + 1
                TempMatrix ← [0, 0, 0, 0]
                TempMatrix ← stack(TempMatrix, transpose(transpose(MatrixUse)[:, i]))
        if MatrixUse[:, 1][i] == MatrixUse[:, 1][i - 1]
            TempMatrix ← stack(TempMatrix, transpose(transpose(MatrixUse)[:, i]))
            NDDividedMatrix[n] ← RemoveInitializingZeroRow(TempMatrix) if i == rows(MatrixUse) - 1
        otherwise
            NDDividedMatrix[n] ← RemoveInitializingZeroRow(TempMatrix)
            if i ≠ rows(MatrixUse) - 1
                n ← n + 1
                TempMatrix ← [0, 0, 0, 0]
                TempMatrix ← stack(TempMatrix, transpose(transpose(MatrixUse)[:, i]))
    return NDDividedMatrix
# The function DivideMatrixND is the first in a series of functions designed to divide a pipe matrix into individual matrices, each with its own nominal diameter (ND) and enumerated pipe schedule (EN). DivideMatrixND first sorts the pipe matrix by ND (second column) and then splits the matrix into smaller matrices, each with one ND value. Each of these matrices are contained in a cell array in a larger matrix, called NDDividedMatrix from now on.
DividedNDShortPipeMatrix := DivideMatrixND(ShortPipesTest) = [
    [5, 1, 1, 2]; [1, 2, 2, 4; 3, 2, 8, 65; 1, 2, 2, 11; 4, 2, 2, 6; 5, 2, 2, 2]; [4, 3, 1, 21; 1, 3, 2, 13]; [4, 4, 8, 4]; [5, 5, 5, 41; 3, 5, 5, 7; 4, 5, 5, 8; 4, 5, 5, 32; 2, 5, 5, 23]; [4, 6, 4, 6; 4.5, 6, 4, 1]
] m
DividedNDLongPipesMatrix := DivideMatrixND(LongPipesTest) = [
    [6, 1, 3, 3]; [33, 2, 1, 86]; [6, 4, 6, 35]; [10, 5, 6, 6; 6, 5, 5, 9]; [10, 6, 4, 4; 9.5, 6, 4, 10; 8, 6, 4, 5]
] m
ENSortMatrix(DividedNDMatrix) :=
    for i ∈ 0 .. rows(DividedNDMatrix) - 1
        TempMatrix ← DividedNDMatrix[i]
        SortedTempMatrix ← csort(TempMatrix, 2)
        SortedDividedNDMatrix[i] ← SortedTempMatrix
    return SortedDividedNDMatrix
# The function ENSortMatrix takes the NDDividedMatrix and sorts each inner matrix by EN (third column) in preparation for the next piece of code, which will divide each of the smaller matrices again, this time by ND.
ENSortedNDPipeMatrix := ENSortMatrix(DividedNDShortPipeMatrix) = [
    [5, 1, 1, 2]; [1, 2, 2, 4; 1, 2, 2, 11; 4, 2, 2, 6; 5, 2, 2, 2; 3, 2, 8, 65]; [4, 3, 1, 21; 1, 3, 2, 13]; [4, 4, 8, 4]; [3, 5, 5, 7; 4, 5, 5, 8; 4, 5, 5, 32; 2, 5, 5, 23; 5, 5, 5, 41]; [4.5, 6, 4, 1; 4, 6, 4, 6]
] m
ENSortedNDLongPipesMatrix := ENSortMatrix(DividedNDLongPipesMatrix) = [
    [6, 1, 3, 3]; [33, 2, 1, 86]; [6, 4, 6, 35]; [6, 5, 5, 9; 10, 5, 6, 6]; [9.5, 6, 4, 10; 8, 6, 4, 5; 10, 6, 4, 4]
] m
DivideMatrixEN(ENSortedNDPipeMatrix) :=
    n ← 0
    for i ∈ 0 .. rows(ENSortedNDPipeMatrix) - 1
        TempMatrix ← [0, 0, 0, 0]
        MatrixUse ← stack(TempMatrix, ENSortedNDPipeMatrix[i])
        for j ∈ 1 .. rows(MatrixUse) - 1
            if j == 1
                TempMatrix ← stack(TempMatrix, transpose(transpose(MatrixUse)[:, j]))
                if j == rows(MatrixUse) - 1
                    ENDividedNDMatrix[n] ← RemoveInitializingZeroRow(TempMatrix)
                    n ← n + 1
            if MatrixUse[:, 2][j] == MatrixUse[:, 2][j - 1]
                TempMatrix ← stack(TempMatrix, transpose(transpose(MatrixUse)[:, j]))
                if j == rows(MatrixUse) - 1
                    ENDividedNDMatrix[n] ← RemoveInitializingZeroRow(TempMatrix)
                    n ← n + 1
            otherwise
                ENDividedNDMatrix[n] ← RemoveInitializingZeroRow(TempMatrix)
                n ← n + 1
                TempMatrix ← [0, 0, 0, 0]
                TempMatrix ← stack(TempMatrix, transpose(transpose(MatrixUse)[:, j])) if j ≠ rows(MatrixUse) - 1
                otherwise
                    TempMatrix ← stack(TempMatrix, transpose(transpose(MatrixUse)[:, j]))
                    ENDividedNDMatrix[n] ← RemoveInitializingZeroRow(TempMatrix)
                    n ← n + 1
    return ENDividedNDMatrix
# The function DivideMatrixEN takes the output from ENSortMatrix and divides each small matrix into smaller ones with the same EN value. The output (called DIvidedPipeMatrix from this point) now contains a series of smaller matries, each of which has rows (pipes) with the same ND and EN values.
DividedPipeMatrix := DivideMatrixEN(ENSortedNDPipeMatrix) = [
    [5, 1, 1, 2]; [1, 2, 2, 4; 1, 2, 2, 11; 4, 2, 2, 6; 5, 2, 2, 2]; [3, 2, 8, 65]; [4, 3, 1, 21]; [1, 3, 2, 13]; [4, 4, 8, 4]; [3, 5, 5, 7; 4, 5, 5, 8; 4, 5, 5, 32; 2, 5, 5, 23; 5, 5, 5, 41]; [4.5, 6, 4, 1; 4, 6, 4, 6]
] m
DividedLongPipesMatrix := DivideMatrixEN(ENSortedNDLongPipesMatrix) = [
    [6, 1, 3, 3]; [33, 2, 1, 86]; [6, 4, 6, 35]; [6, 5, 5, 9]; [10, 5, 6, 6]; [9.5, 6, 4, 10; 8, 6, 4, 5; 10, 6, 4, 4]
] m
CombineLengthsInDividedMatrix(DividedPipeMatrix) :=
    for i ∈ 0 .. rows(DividedPipeMatrix) - 1
        if rows(DividedPipeMatrix[i]) > 1
            SortedMatrix ← csort(DividedPipeMatrix[i], 0)
            CombinedMatrix[i] ← CombineLengths(SortedMatrix)
        CombinedMatrix[i] ← DividedPipeMatrix[i] otherwise
    return CombinedMatrix
CombinedDividedMatrix := CombineLengthsInDividedMatrix(DividedPipeMatrix) = [
    [5, 1, 1, 2]; [1, 2, 2, 15; 4, 2, 2, 6; 5, 2, 2, 2]; [3, 2, 8, 65]; [4, 3, 1, 21]; [1, 3, 2, 13]; [4, 4, 8, 4]; [2, 5, 5, 23; 3, 5, 5, 7; 4, 5, 5, 40; 5, 5, 5, 41]; [4, 6, 4, 6; 4.5, 6, 4, 1]
] m
CombinedDividedLongPipesMatrix := CombineLengthsInDividedMatrix(DividedLongPipesMatrix) = [
    [6, 1, 3, 3]; [33, 2, 1, 86]; [6, 4, 6, 35]; [6, 5, 5, 9]; [10, 5, 6, 6]; [8, 6, 4, 5; 9.5, 6, 4, 10; 10, 6, 4, 4]
] m
CombinePipeNumber(LanceMatrix) :=
    CombinedLanceMatrix ← [0, 0, 0]
    for i ∈ 1 .. rows(LanceMatrix) - 1
        if LanceMatrix[:, 1][i] == LanceMatrix[:, 1][i - 1] and LanceMatrix[:, 2][i] == LanceMatrix[:, 2][i - 1]
            CombinedLanceMatrix ← stack(CombinedLanceMatrix, transpose(transpose(LanceMatrix)[:, i - 1])) if LanceMatrix[:, 1][i] ≠ CombinedLanceMatrix[:, 1][rows(CombinedLanceMatrix) - 1] and LanceMatrix[:, 2][i] ≠ CombinedLanceMatrix[:, 2][rows(CombinedLanceMatrix) - 1]
            CombinedLanceMatrix[:, 0][rows(CombinedLanceMatrix) - 1] ← CombinedLanceMatrix[:, 0][rows(CombinedLanceMatrix) - 1] + LanceMatrix[:, 0][i]
        otherwise
            CombinedLanceMatrix ← stack(CombinedLanceMatrix, transpose(transpose(LanceMatrix)[:, i - 1]))
            CombinedLanceMatrix ← stack(CombinedLanceMatrix, transpose(transpose(LanceMatrix)[:, i])) if i == rows(LanceMatrix) - 1
    return RemoveInitializingZeroRow(CombinedLanceMatrix)
# The function CombinePipeNumber is similar to the CombineLengths function above, except it combines the numbers of rows (pipes) with the same EN and ND in the new matrix LanceMatrix (created below).
CutLongPipes(LongPipesDividedMatrix) :=
    n ← 0
    LanceMatrix ← [0, 0, 0]
    for i ∈ 0 .. rows(LongPipesDividedMatrix) - 1
        MatrixUse ← LongPipesDividedMatrix[i]
        LanceTempMatrix ← [0, 0, 0]
        CountZeros ← 0
        for j ∈ 0 .. rows(MatrixUse) - 1
            NumberOfLances ← floor(MatrixUse[:, 0][j]/L_UsableLance)
            LeftoverLength ← MatrixUse[:, 0][j] - NumberOfLances*L_UsableLance
            TempMatrix ← [0, 0, 0]
            TempMatrix[:, 0] ← NumberOfLances*MatrixUse[:, 3][j]
            TempMatrix[:, 1] ← MatrixUse[:, 1][j]
            TempMatrix[:, 2] ← MatrixUse[:, 2][j]
            LanceTempMatrix ← stack(LanceTempMatrix, TempMatrix)
            MatrixUse[:, 0][j] ← LeftoverLength
            CountZeros ← 1 if LeftoverLength == 0
        if CountZeros == 1 and rows(MatrixUse) > 1
            LeftoverMatrix[n] ← RemoveZeroLengths(MatrixUse)
            n ← n + 1
        if CountZeros == 0
            LeftoverMatrix[n] ← MatrixUse
            n ← n + 1
        LanceMatrix ← stack(LanceMatrix, RemoveInitializingZeroRow(LanceTempMatrix))
    return [LeftoverMatrix; RemoveInitializingZeroRow(CombinePipeNumber(LanceMatrix))]
# The function CutLongPipes will calculate the number of lances that each pipe within the divided LongPipesMatrix needs to be constructed. This number is assigned to its corresponding ND and EN values in the new matrix LanceMatrix. The rest of the length needed to construct the pipe is retained in the old divided LongPipesMatrix, now renamed LeftoverMatrix.
LongPipesCut := CutLongPipes(CombinedDividedLongPipesMatrix) = [
    [
        [0.5, 1, 3, 3]; [0.5, 4, 6, 35]; [0.5, 5, 5, 9]; [4.5, 5, 6, 6]; [2.5, 6, 4, 5; 4, 6, 4, 10; 4.5, 6, 4, 4]
    ];
    [3, 1, 3; 516, 2, 1; 35, 4, 6; 9, 5, 5; 6, 5, 6; 19, 6, 4]
] m
# n = number of lances used | ND | EN
LanceMatrix := LongPipesCut[1] = [3, 1, 3; 516, 2, 1; 35, 4, 6; 9, 5, 5; 6, 5, 6; 19, 6, 4] m
LeftoverMatrix := LongPipesCut[0] = [
    [0.5, 1, 3, 3]; [0.5, 4, 6, 35]; [0.5, 5, 5, 9]; [4.5, 5, 6, 6]; [2.5, 6, 4, 5; 4, 6, 4, 10; 4.5, 6, 4, 4]
] m
RemoveZeroLengthMatrices(Array) :=
    n ← 0
    for i ∈ 0 .. rows(Array) - 1
        if Array[i][:, 0][0] ≠ 0
            NewArray[n] ← Array[i]
            n ← n + 1
    return NewArray  # RemoveZeroLengthMatrices is a code that is utilized in the CombineShortAndLeftover code to eliminate a repetition problem.
CombineShortAndLeftover(ShortPipeMatrix, LeftoverMatrix) :=
    n ← rows(ShortPipeMatrix)
    for i ∈ 0 .. rows(ShortPipeMatrix) - 1
        WorkingShortPipesMatrix ← ShortPipeMatrix[i]
        for j ∈ 0 .. rows(LeftoverMatrix) - 1
            WorkingLeftoverMatrix ← LeftoverMatrix[j]
            if WorkingShortPipesMatrix[:, 1][0] == WorkingLeftoverMatrix[:, 1][0] and WorkingShortPipesMatrix[:, 2][0] == WorkingLeftoverMatrix[:, 2][0]
                ShortPipeMatrix[i] ← stack(WorkingShortPipesMatrix, WorkingLeftoverMatrix)
                LeftoverMatrix[j] ← [0, 0, 0, 0]
    NewLeftoverMatrix ← RemoveZeroLengthMatrices(LeftoverMatrix)
    for k ∈ 0 .. rows(NewLeftoverMatrix) - 1
        ShortPipeMatrix[n] ← NewLeftoverMatrix[k]
        n ← n + 1
    return ShortPipeMatrix
# The function CombineShortAndLeftover combines the divided ShortPipeMatrix (CombinedDividedMatrix) and LeftoverMatrix into one Matrix, since they both contain information about pipes less than the length of a usable lance.
CombinedShortMatrix := CombineShortAndLeftover(CombinedDividedMatrix, LeftoverMatrix) = [
    [5, 1, 1, 2]; [1, 2, 2, 15; 4, 2, 2, 6; 5, 2, 2, 2]; [3, 2, 8, 65]; [4, 3, 1, 21]; [1, 3, 2, 13]; [4, 4, 8, 4]; [2, 5, 5, 23; 3, 5, 5, 7; 4, 5, 5, 40; 5, 5, 5, 41; 0.5, 5, 5, 9]; [4, 6, 4, 6; 4.5, 6, 4, 1; 2.5, 6, 4, 5; 4, 6, 4, 10; 4.5, 6, 4, 4]; [0.5, 1, 3, 3]; [0.5, 4, 6, 35]; [4.5, 5, 6, 6]
] m
CombinedShortMatrix := CombineShortAndLeftover(CombinedDividedMatrix, LeftoverMatrix) = [
    [5, 1, 1, 2]; [1, 2, 2, 15; 4, 2, 2, 6; 5, 2, 2, 2]; [3, 2, 8, 65]; [4, 3, 1, 21]; [1, 3, 2, 13]; [4, 4, 8, 4]; [2, 5, 5, 23; 3, 5, 5, 7; 4, 5, 5, 40; 5, 5, 5, 41; 0.5, 5, 5, 9]; [4, 6, 4, 6; 4.5, 6, 4, 1; 2.5, 6, 4, 5; 4, 6, 4, 10; 4.5, 6, 4, 4]; [0.5, 1, 3, 3]; [0.5, 4, 6, 35]; [4.5, 5, 6, 6]
] m
RemoveZeroN(Matrix) :=
    n ← 0
    if rows(transpose(Matrix)) == 4
        NoZerosMatrix ← [0, 0, 0, 0]
        NoZerosMatrix ← stack(NoZerosMatrix, Matrix) if rows(Matrix) == 1 and Matrix[:, 3][0] == 0
        otherwise
            for i ∈ 0 .. rows(Matrix) - 1
                if Matrix[:, 3][i] ≠ 0
                    NoZerosMatrix ← stack(NoZerosMatrix, transpose(transpose(Matrix)[:, i]))
                    n ← n + 1
    if rows(transpose(Matrix)) == 3
        NoZerosMatrix ← [0, 0, 0]
        NoZerosMatrix ← stack(NoZerosMatrix, Matrix) if rows(Matrix) == 1 and Matrix[:, 0][0] == 0
        otherwise
            for i ∈ 0 .. rows(Matrix) - 1
                if Matrix[:, 0][i] ≠ 0
                    NoZerosMatrix ← stack(NoZerosMatrix, transpose(transpose(Matrix)[:, i]))
                    n ← n + 1
    return RemoveInitializingZeroRow(NoZerosMatrix)
# RemoveZeroN will take a Matrix and remove any rows with no number N (last row in 4 column divided matrix, first row in 3 column lance matrix) - it will be used in the AddToLanceMatrix function below to prevent double-counting. If there is only one row that has a corresponding length of zero, the output will be the same as the input.
AddToLanceMatrix(n, ND, EN, LanceMatrix) :=
    k ← 0
    for i ∈ 0 .. rows(LanceMatrix) - 1
        if ND == LanceMatrix[:, 1][i] and EN == LanceMatrix[:, 2][i] and k == 0
            LanceMatrix[:, 0][i] ← LanceMatrix[:, 0][i] + n
            k ← 1
    LanceMatrix ← stack(LanceMatrix, [n, ND, EN]) if k == 0
    return LanceMatrix  # AddToLanceMatrix adds a specified number (n) of pipes to the row in LanceMatrix with the appropriate ND and EN values.
AddToCutMatrix(length, n, ND, EN, CutMatrix) :=
    found ← 0
    LengthNumberMatrix ← [length, n]
    for i ∈ 0 .. rows(CutMatrix) - 1
        if ND == CutMatrix[:, 1][i] and EN == CutMatrix[:, 2][i]
            for j ∈ 0 .. rows(CutMatrix[:, 0][i]) - 1
                if CutMatrix[:, 0][i][:, 0][j] == length
                    CutMatrix[:, 0][i][:, 1][j] ← CutMatrix[:, 0][i][:, 1][j] + n
                    added ← 1
            CutMatrix[:, 0][i] ← stack(CutMatrix[:, 0][i], LengthNumberMatrix) if added ≠ 1
            found ← 1
    if found == 0
        NewLine ← [0, ND, EN]
        NewLine[:, 0][0] ← LengthNumberMatrix
        CutMatrix ← stack(CutMatrix, NewLine)
    return CutMatrix
# CutMatrix will consist of three columns. The first column will contain another matrix with the first column containing lengths and the second column containing the number of pipes of that length being added. The second column of CutMatrix will be the ND and the third will be the EN.
CuttingSubCode(MatrixUse, CutMatrix, LanceMatrix) :=
    LanceUse ← L_UsableLance
    for j ∈ 0 .. rows(MatrixUse) - 1
        if MatrixUse[:, 3][j] > 0
            MaxLanceUse ← LanceUse - MatrixUse[:, 0][j]
            LanceUse ← 0
            for k ∈ 0 .. rows(MatrixUse) - 1
                LanceUse ← MatrixUse[:, 0][k] if MatrixUse[:, 0][k] > LanceUse and MatrixUse[:, 0][k] ≤ MaxLanceUse and MatrixUse[:, 3][k] > 0
            for p ∈ 0 .. rows(MatrixUse) - 1
                if MatrixUse[:, 0][p] == LanceUse
                    if p == j
                        if MatrixUse[:, 0][p] ≤ LanceUse/2
                            CutsPerPipe ← floor(LanceUse/MatrixUse[:, 0][p])
                            N_Use ← MatrixUse[:, 3][p]/CutsPerPipe
                            CutMatrix ← AddToCutMatrix(MatrixUse[:, 0][j], MatrixUse[:, 3][j], MatrixUse[:, 1][j], MatrixUse[:, 2][j], CutMatrix)
                            LanceMatrix ← AddToLanceMatrix(N_Use*CutsPerPipe, MatrixUse[:, 1][j], MatrixUse[:, 2][j], LanceMatrix)
                            MatrixUse[:, 3][p] ← 0
                            MatrixUse[:, 3][j] ← 0
                        otherwise
                            N_Use ← MatrixUse[:, 3][p]
                            MatrixUse[:, 3][p] ← 0
                            MatrixUse[:, 3][j] ← 0
                            CutMatrix ← AddToCutMatrix(MatrixUse[:, 0][j], N_Use, MatrixUse[:, 1][j], MatrixUse[:, 2][j], CutMatrix)
                            LanceMatrix ← AddToLanceMatrix(N_Use, MatrixUse[:, 1][j], MatrixUse[:, 2][j], LanceMatrix)
                    otherwise
                        if min(MatrixUse[:, 3][j], MatrixUse[:, 3][p]) == MatrixUse[:, 3][p]
                            N_Use ← MatrixUse[:, 3][p]
                            MatrixUse[:, 3][p] ← 0
                            MatrixUse[:, 3][j] ← MatrixUse[:, 3][j] - N_Use
                        otherwise
                            N_Use ← MatrixUse[:, 3][j]
                            MatrixUse[:, 3][j] ← 0
                            MatrixUse[:, 3][p] ← MatrixUse[:, 3][p] - N_Use
                    CutMatrix ← AddToCutMatrix(MatrixUse[:, 0][j], N_Use, MatrixUse[:, 1][j], MatrixUse[:, 2][j], CutMatrix)
                    CutMatrix ← AddToCutMatrix(MatrixUse[:, 0][p], N_Use, MatrixUse[:, 1][p], MatrixUse[:, 2][p], CutMatrix)
                    LanceMatrix ← AddToLanceMatrix(ceil(N_Use/(2 m))*m, MatrixUse[:, 1][p], MatrixUse[:, 2][p], LanceMatrix)
                    LanceUse ← L_UsableLance
            if LanceUse == 0
                CutMatrix ← AddToCutMatrix(MatrixUse[:, 0][j], MatrixUse[:, 3][j], MatrixUse[:, 1][j], MatrixUse[:, 2][j], CutMatrix)
                LanceMatrix ← AddToLanceMatrix(MatrixUse[:, 3][j], MatrixUse[:, 1][j], MatrixUse[:, 2][j], LanceMatrix)
                MatrixUse[:, 3][j] ← 0
    return [RemoveZeroN(MatrixUse); CutMatrix; LanceMatrix]  # initialize LanceUse to 5.5m
# go through each row in the ND/EN matrix
# the row's N may be zero due to the code following, do not use if so
# the new lance left to use is going to be at most the old length - the amount just used
# set LanceUse to 0 for use in following code
# set new LanceUse value to be the biggest length value in the matrix that is also less than the at most MaxLanceUse value from before
# if there is no other pipe that is less than the Max LanceUse, then LanceUse=0
# go through the matrix to find row corresponding to the LanceUse value just found
# if p=j then you're cutting out the same length from the same pipe
# if the amount of pipe you're cutting is smaller than half the length of the lance you're using, you can cut out at least 2 from the pipe (e.g. if the length is 1 and your lance is 5.5 you can cut out 5 from that lance)
# max number of times you can cut out the lance (floor function because you can only cut out 5.5/2=~2 pipes not 3)
# the number of lances you're going to use is the number of pipes you need divided by the number of pipes you can cut out per lance
# n is the total number of lengths being added (original from matrix)
# n = N.Use since it's the total number of LANCES being used
# if the amount of pipe is more than half the length of the Lance you can only cut out one per lance
# if the N's are different for the two rows found, the N to add to the CutMatrix and LanceMatrix depends on which of the N's used is smaller - the one that is larger will have leftover N to be used in the code and the one that is smaller will have 0
# add the minimum N just found for first row of MatrixUse to CutMatrix
# repeat for other row used
# also add to LanceMatrix
# assume the two pipes just cut out of the lance use up most of the lance. reinitialize to 5.5m
CuttingOptimization(DividedMatrix, LanceMatrix) :=
    CutMatrix ← [0, 0, 0]
    for i ∈ 0 .. rows(DividedMatrix) - 1
        while max(DividedMatrix[:, 0][i][:, 3]) > 0
            [DividedMatrix[i]; CutMatrix; LanceMatrix] ← CuttingSubCode(DividedMatrix[i], CutMatrix, LanceMatrix)
    return [RemoveInitializingZeroRow(CutMatrix); LanceMatrix]  # initialize CutMatrix
# go through each matrix in the cell array (not necessary for testmatrix)
EndMatrices := CuttingOptimization(CombinedShortMatrix, LanceMatrix) = [
    [
        [5, 2], 1, 1;
        [1, 33; 4, 6; 5, 2], 2, 2;
        [3, 65], 2, 8;
        [4, 21], 3, 1;
        [1, 39], 3, 2;
        [4, 4], 4, 8;
        [2, 55; 3, 7; 4, 40; 0.5, 9; 5, 41], 5, 5;
        [4, 16; 4.5, 5; 2.5, 5], 6, 4;
        [0.5, 9], 1, 3;
        [0.5, 105], 4, 6;
        [4.5, 6], 5, 6
    ];
    [
        8, 1, 3;
        516, 2, 1;
        88, 4, 6;
        114, 5, 5;
        12, 5, 6;
        45, 6, 4;
        2, 1, 1;
        19, 2, 2;
        65, 2, 8;
        21, 3, 1;
        20, 3, 2;
        4, 4, 8
    ]
] m
# Pipe Size Arrays
# Pipe Nominal Diameter | Pipe Nominal Diameter | Pipe Nominal Diameter
# Pipe Nominal Diameter | Pipe Nominal Diameter
PipeSizeArray_PVCCoupling := [4 in; 6 in; 8 in; 10 in; 12 in]
PipeSizeArray_PVCDiffusers := [1 in; 1.5 in; 2 in; 3 in; 4 in]
PipeSizeArray_PVCManifold := [4 in; 6 in; 8 in; 10 in; 12 in]
PipeSizeArray_PVCElbows := [4 in; 6 in; 8 in; 10 in; 12 in]
PipeSizeArray_PVCCaps := [4 in; 6 in; 8 in; 10 in; 12 in]
# Cost Inputs:
USD := 1 ¤  # USD defined as the base currency.
UnitCost_Walls := 50*USD/m^2
# Unit costs are available at https://confluence.cornell.edu/display/cee4540/DC+Capstone+Design+Ideas+11
UnitCost_Slab := 30*USD/m^2
UnitCost_Roof := 37*USD/m^2
# Need actual price of 12" coupling | Cost per meter
# Cost of Elbow | Cost of Cap | Cost of Coupling
CostArray_PVCManifold := [25.41/6; 70.83/6; 127.96/6; 166.2/6; 264.89/6]*USD/m
CostArray_PVCDiffusers := [5/6; 7.2/6; 9.57/6; 14.61/6; 25.19/6]*USD/m
CostArray_PVCElbows := [30; 33.15; 60.45; 68.01; 400.84]*USD
CostArray_PVCCaps := [20; 20.65; 31.23; 35.77; 153.26]*USD
CostArray_PVCCoupling := [26.90; 30.98; 36.27; 40.05; 150]*USD
# Costs and Cost Arrays
# n = number of lances used | ND | EN | ND | EN | Cost per unit length
CutMatrix := EndMatrices[0] = [
    [5, 2], 1, 1;
    [1, 33; 4, 6; 5, 2], 2, 2;
    [3, 65], 2, 8;
    [4, 21], 3, 1;
    [1, 39], 3, 2;
    [4, 4], 4, 8;
    [2, 55; 3, 7; 4, 40; 0.5, 9; 5, 41], 5, 5;
    [4, 16; 4.5, 5; 2.5, 5], 6, 4;
    [0.5, 9], 1, 3;
    [0.5, 105], 4, 6;
    [4.5, 6], 5, 6
] m
NewLanceMatrix := EndMatrices[1] = [
    8, 1, 3;
    516, 2, 1;
    88, 4, 6;
    114, 5, 5;
    12, 5, 6;
    45, 6, 4;
    2, 1, 1;
    19, 2, 2;
    65, 2, 8;
    21, 3, 1;
    20, 3, 2;
    4, 4, 8
] m
TestPipeSizeArray := [4, 8; 3, 2; 3, 1; 2, 8; 2, 2; 1, 1; 6, 4; 5, 6; 5, 5; 4, 6; 2, 1; 1, 3]*m
TestPipeCostArray := [.5; .6; .7; .4; .6; .7; .1; .2; .5; .7; .8; .2]*USD/m
PipeCostApproximation(SizeArray, CostArray, LanceMatrix) :=
    Cost ← 0*USD
    CostArray ← L_UsableLance*CostArray
    for i ∈ 0 .. rows(LanceMatrix) - 1
        for j ∈ 0 .. rows(CostArray) - 1
            Cost ← Cost + CostArray[j]*LanceMatrix[:, 0][i] if LanceMatrix[:, 1][i] == SizeArray[:, 0][j] and LanceMatrix[:, 2][i] == SizeArray[:, 1][j]
    return Cost
# cost adjusted to be per lance instead of per unit
PipeCostApproximation(TestPipeSizeArray, TestPipeCostArray, NewLanceMatrix) = 3340.7 m*USD
