# Operator Access
# Layers
OpWalkwayLayer := layer_new("OpWalkwayCon", grey)
SelectOpWalkway := SelectLayer("OpWalkwayCon")
OpWalkwayFrz := FreezeLayer("OpWalkwayCon")
SubtractFromOpWalkway := SubtractF(["OpWalkwayCon"], "DeleteMe")
# Main floor
Floor_Origin := [Plant_Origin[0]; Plant_Origin[1]; Z_Walkway - T_Floor]
Floor_Dim := [
    -(Plant_Origin[0] - (Fi_origin[0] - L_Fi - T_FiWall + T_PlantWall));
    N_SedTanks*W_Sed + (N_SedTanks - 1)*T_SedDividingWall + max(T_SedWall, T_FlocWall) + W_Floc + T_FlocWall + W_EtWalkway;
    T_Floor
]
FloorBox := BoxF(Floor_Origin, Floor_Origin + Floor_Dim, [0; 0; 0]*deg)
PlantFloorScript := stack(OpWalkwayLayer, FloorBox, OpWalkwayFrz)
# Stairs to door and basement
# Dimensions and origins
L_EntranceLanding := 2 m
L_BasementLanding := 1 m
L_EntranceStairs := FiInletChannel_Origin[0] + T_PlantWall - Fi_origin[0] + L_Fi + (T_FiWall - T_PlantWall) - L_EntranceLanding
L_BasementStairs := L_EntranceStairs - L_BasementLanding - T_PlantWall
H_EntranceStairs := H_Stairs(L_EntranceStairs)
Z_Entrance := Z_Walkway - H_EntranceStairs
Z_BasementFloor := Z_FiBottom
H_BasementStairs := Z_Entrance - Z_BasementFloor
EntranceStairs_Origin := [
    FiInletChannel_Origin[0] + T_PlantWall;
    Fi_origin[1] + N_Fi*(W_Fi + T_FiWall) + W_BasementStairs + T_PlantWall;
    Z_Walkway
]
BasementStairs_Origin := [EntranceStairs_Origin[0] - L_EntranceStairs; EntranceStairs_Origin[1]; Z_Entrance]
W_EntranceStair := W_Stair(H_EntranceStairs)
W_BasementStair := W_StairFixed(L_BasementStairs)  # Width of a single stair in the staircase
H_EntranceStair := H_Stair(H_EntranceStairs)
# Height of a single stair in the staircase
H_BasementStair := H_StairFixed(L_BasementStairs, H_BasementStairs)
# Stairs
EntranceStairs := StairsF(EntranceStairs_Origin, W_EntranceStairs + T_PlantWall, H_EntranceStairs, 180 deg)
BasementStairs := StairsFixedF(BasementStairs_Origin, W_BasementStairs + T_PlantWall, H_BasementStairs, L_BasementStairs, 0 deg)
LowerStairScript := stack(SelectOpWalkway, EntranceStairs, BasementStairs, OpWalkwayFrz)
# Stairwell walls
StairwellSouthWall := BoxF(EntranceStairs_Origin + [-T_PlantWall; 0 m; 0 m], [BasementStairs_Origin[0]; EntranceStairs_Origin[1] - T_PlantWall; Z_BasementFloor - T_Floor], [0; 0; 0]*deg)
StairwellNorthWall := WedgeF([BasementStairs_Origin[0]; EntranceStairs_Origin[1] + W_EntranceStairs; EntranceStairs_Origin[2]], [
    BasementStairs_Origin[0] + H_EntranceStairs + T_Floor;
    EntranceStairs_Origin[1] + W_EntranceStairs + T_PlantWall;
    EntranceStairs_Origin[2] + L_EntranceStairs + W_EntranceStair + T_Floor
], [0; 90; 0]*deg)
StairwellSouthWallCut := WedgeF([
    BasementStairs_Origin[0] - W_BasementStair - T_Floor + (T_Floor*(L_BasementStairs + W_BasementStair + T_Floor)/(H_BasementStairs + T_Floor));
    EntranceStairs_Origin[1];
    Z_BasementFloor - T_Floor
], [
    BasementStairs_Origin[0] + L_BasementStairs;
    EntranceStairs_Origin[1] - T_PlantWall;
    Z_Entrance - T_Floor
], [0; 0; 0]*deg)
StairwellWallScript :=
    stack(SelectOpWalkway, StairwellSouthWall, StairwellNorthWall, OpWalkwayFrz, StairwellSouthWallCut, GroupDelete, SubtractFromOpWalkway) if EN_Stairwell == 1
    view("t") otherwise
# Lower floors
OpEntranceLanding := BoxF([
    Fi_origin[0] - L_Fi - (T_FiWall - T_PlantWall);
    Fi_origin[1] + N_Fi*(W_Fi + T_FiWall);
    Z_Entrance - T_Floor
], [
    Fi_origin[0] - L_Fi - (T_FiWall - T_PlantWall) + L_EntranceLanding;
    Fi_origin[1] + N_Fi*(W_Fi + T_FiWall) + W_BasementStairs + T_PlantWall + W_EntranceStairs + T_PlantWall;
    Z_Entrance
], [0; 0; 0]*deg)
BasementFloor := BoxF([Fi_origin[0] + T_FiWall; Fi_origin[1] - T_FiWall + T_PlantWall; Z_BasementFloor - T_Floor], [FiInletChannel_Origin[0]; Fi_origin[1] + N_Fi*(W_Fi + T_FiWall); Z_BasementFloor], [0; 0; 0]*deg)
BasementLanding := BoxF([FiInletChannel_Origin[0]; Fi_origin[1] + N_Fi*(W_Fi + T_FiWall); Z_BasementFloor - T_Floor], [
    FiInletChannel_Origin[0] - L_BasementLanding;
    Fi_origin[1] + N_Fi*(W_Fi + T_FiWall) + W_BasementStairs;
    Z_BasementFloor
], [0; 0; 0]*deg)
LowerFloorScript := stack(SelectOpWalkway, OpEntranceLanding, BasementFloor, BasementLanding, Union_All, OpWalkwayFrz)
# Floor cut
LowerAccessFloorCut := BoxF([
    Fi_origin[0] - L_Fi - (T_FiWall - T_PlantWall);
    Fi_origin[1] + N_Fi*(W_Fi + T_FiWall) + W_BasementStairs + T_PlantWall;
    Z_Walkway - T_Floor - zc
], [
    FiInletChannel_Origin[0] + T_PlantWall;
    Fi_origin[1] + N_Fi*(W_Fi + T_FiWall) + W_BasementStairs + T_PlantWall + W_EntranceStairs;
    Z_Walkway + zc
], [0; 0; 0]*deg)
OpLowerAccessScript :=
    stack(LowerAccessFloorCut, GroupDelete, SubtractFromOpWalkway, LowerStairScript, LowerFloorScript) if EN_Stairwell == 1
    view("t") otherwise
# Sed tank floor cuts
SedSubBox_Origin := [Plant_Origin[0]; Plant_Origin[1]; Z_Walkway - T_Floor - zc]
SedSubBox_Dim := [
    -L_Sed - T_PlantWall;
    N_SedTanks*W_Sed + (N_SedTanks - 1)*T_SedDividingWall + T_SedWall;
    T_Floor + 2*zc
]
SedDrainBox_Origin := [
    SedSludgeDrainValve_Origin[0] - ValveLength(ND_SedJetReverser);
    SedSludgeDrainValve_Origin[1] + ValveLength(ND_SedJetReverser)/2;
    Z_Walkway - T_Floor - zc
]
SedDrainBox_Dim := [
    SedHopperDrainValve_Origin[0] - SedSludgeDrainValve_Origin[0] + ValveLength(ND_SedJetReverser) + ValveSocket(ND_SedHopperDrain);
    SedHopperDrainValve_Origin[1] - SedSludgeDrainValve_Origin[1] - ValveLength(ND_SedJetReverser)/2 - ValveLength(ND_SedHopperDrain)/2;
    T_Floor + 2*zc
]
SedSubBox := BoxF(SedSubBox_Origin, SedSubBox_Origin + SedSubBox_Dim, [0; 0; 0]*deg)
SedDrainSubBox := BoxF(SedDrainBox_Origin, SedDrainBox_Origin + SedDrainBox_Dim, [0; 0; 0]*deg)
ArraySedDrainBox := ArrayLast(N_SedTanks, 1, W_Sed + T_SedDividingWall)
MirrorSedBox := Mirror3dLast("yz", [Floc_Origin[0] - L_Floc - W_PlantDC/2 - T_PlantWall; 0 m], "n")
SedFloorCutScript := stack(SedSubBox, SedDrainSubBox, ArraySedDrainBox)
# Flocculator floor cuts
FlocSubBox_Origin := [Floc_Origin[0]; Floc_Origin[1]; Z_Walkway - T_Floor - zc]
FlocSubBox_Dim := [
    -T_PlantWall - L_Sed;
    N_FlocChannels*W_FlocChannel + (N_FlocChannels - 1)*T_FlocDividingWall + T_FlocWall;
    T_Floor + 2*zc
]
FlocSubBox := BoxF(FlocSubBox_Origin, FlocSubBox_Origin + FlocSubBox_Dim, [0; 0; 0]*deg)
MirrorFlocBox := Mirror3dAll("yz", [Floc_Origin[0] - L_Floc - W_PlantDC/2 - T_PlantWall; 0 m], "n")
FlocFloorCutScript := stack(FlocSubBox)
# Entrance tank floor cut
EtSubBox_Origin := [Et_Origin[0] + T_PlantWall; Et_Origin[1] - T_PlantWall; Z_Walkway - T_Floor - zc]
EtSubBox_Dim := [-2*T_PlantWall - L_Et; T_PlantWall + W_Et; T_Floor + 2*zc]
EtSubBox := BoxF(EtSubBox_Origin, EtSubBox_Origin + EtSubBox_Dim, [0; 0; 0]*deg)
# Dose controller floor cuts
DosingSubBox_Dim := [2*ConRadius(ND_EtFloat); L_CdcLever + S_Fitting; T_Floor + 2*zc]
DosingSubBox_Origin := [
    EtFloat_Origin[0] - ConRadius(ND_EtFloat);
    Et_Origin[1] + W_Et + T_FlocWall;
    Z_Walkway - T_Floor - zc
]
DosingSubBox := BoxF(DosingSubBox_Origin, DosingSubBox_Origin + DosingSubBox_Dim, [0; 0; 0]*deg)
ChemDrainSubBox := BoxF([
    ChemPlatformFloor_Origin[0] + T_PlantWall;
    Et_Origin[1] + W_Et - 12*ConRadius(1/2*in) - S_Fitting;
    Z_Walkway - T_Floor
], [
    ChemPlatformFloor_Origin[0] + T_PlantWall + 2*ConRadius(1/2*in) + zc;
    Et_Origin[1] + W_Et;
    Z_Walkway
], [0; 0; 0]*deg)
CdcFloorCutScript := stack(DosingSubBox, ChemDrainSubBox)
# Filter floor cuts
FilterSubBox_Origin := [Fi_origin[0] + T_FiWall; Fi_origin[1] - T_FiWall; Z_Walkway - T_Floor - zc]
FilterSubBox_Dim := [-2*T_FiWall - L_Fi; T_FiWall + N_Fi*(W_Fi + T_FiWall); T_Floor + 2*zc]
FilterSubBox := BoxF(FilterSubBox_Origin, FilterSubBox_Origin + FilterSubBox_Dim, [0; 0; 0]*deg)
FiSiphonSubBox_Origin := [
    Fi_origin[0] + T_FiWall + outerradius(3 in);
    Fi_origin[1] + S_Fitting + ConRadius(ND_FiSiphon);
    Z_Walkway - T_Floor - zc
]
FiSiphonSubBox := CylinderF(FiSiphonSubBox_Origin, outerradius(3 in), T_Floor + 2*zc, [0; 90]*deg)
ArrayFiSiphonSubBox := ArrayLast(N_Fi, 1, W_Fi + T_FiWall)
FiAuxSubBox_Origin := [
    FiInletChannel_Origin[0] + T_PlantWall;
    FiInletChannel_Origin[1] - T_PlantWall;
    Z_Walkway - T_Floor - zc
]
FiAuxSubBox_Dim := [
    -W_FiInletChannel - L_FiOverflow - L_FiExit - 4*T_PlantWall;
    L_FiInletChannel + 2*T_PlantWall;
    T_Floor + 2*zc
]
FiAuxSubBox := BoxF(FiAuxSubBox_Origin, FiAuxSubBox_Origin + FiAuxSubBox_Dim, [0; 0; 0]*deg)
MirrorFilterBox := Mirror3dLast("yz", [Floc_Origin[0] - L_Floc - W_PlantDC/2 - T_PlantWall; 0 m], "n")
FiFloorCutScript := stack(FilterSubBox, FiSiphonSubBox, ArrayFiSiphonSubBox, FiAuxSubBox, GroupDelete, SubtractFromOpWalkway)
FiAuxPeninsula_Origin := [
    FiOverflowBox_Origin[0];
    FiEntranceBox_origin[1] + 2*W_FiEntrance + W_FiOverflow + 3*T_PlantWall;
    Z_Walkway - T_Floor
]
FiAuxPeninsula_Dim := [-L_FiOverflow - L_FiExit - 2*T_PlantWall; W_FiOverflow; T_Floor]
FiAuxPeninsula := BoxF(FiAuxPeninsula_Origin, FiAuxPeninsula_Origin + FiAuxPeninsula_Dim, [0; 0; 0]*deg)
ArrayFiAuxPeninsula := ArrayLast(max(N_FiPeninsulas, 1), 1, 2*W_FiEntrance + W_FiOverflow + 4*T_PlantWall)
FiAuxPeninsulaScript := stack(SelectOpWalkway, FiAuxPeninsula, ArrayFiAuxPeninsula, Union_All, OpWalkwayFrz)
FiFloorScript :=
    stack(FiFloorCutScript, FiAuxPeninsulaScript) if N_FiPeninsulas > 0
    FiFloorCutScript otherwise
# Chem platform floor cuts
ChemPlatformSubBox_Origin := [ChemPlatformFloor_Origin[0]; ChemPlatformFloor_Origin[1]; Z_Walkway - T_Floor - zc]
ChemPlatformSubBox_Dim := [-W_ChemPlatform - zc; -L_ChemPlatform - T_PlantWall; T_Floor + 2*zc]
ChemPlatformSubBox := BoxF(ChemPlatformSubBox_Origin, ChemPlatformSubBox_Origin + ChemPlatformSubBox_Dim, [0; 0; 0]*deg)
AC_OperatorAccess := stack(PlantFloorScript, OpLowerAccessScript, SedFloorCutScript, FlocFloorCutScript, EtSubBox, ChemPlatformSubBox, CdcFloorCutScript, FiFloorScript, StairwellWallScript)
