Q_Plant := 40*L/s
HL_FlocMax := 40 cm
H_SedSlopesToFlocWeirMin := 25 cm
T_FlocSlab := 15 cm
T_SedWall := 15 cm
T_SedDividingWall := 15 cm
T_SedChannelWall := 15 cm
T_FlocWall := 15 cm
T_FlocDividingWall := 15 cm
T_FiWall := 25 cm
T_FiBoxWall := 15 cm
T_PlantWall := 15 cm
T_PlantFloor := 20 cm
T_ChemSlab := 15 cm
T_DrainChannelWall := 15 cm
C_CoagDoseMax := 40*mg/L
C_ChlorDoseAve := 1*mg/L
# Mathcad to AutoCAD translators:
# [reference: MtoATranslators.xmcd]
# The wrapped MtoA translator contains the functions that the user will want to access. These functions will draw pieces with full functionality - specifying the location, dimension, and orientation of the object. Also, it contains layer control and subtraction capabilities for grouped objects.
# [reference: MtoATranslatorsWrapped.xmcd]
# Plant design calculations:
# [reference: ExpertInputs.xmcd]
L_CdcLever = 0.5 m
# [reference: MathFunctions.xmcd]
# [reference: PipeDatabase.xmcd]
# [reference: MaterialsDatabase.xmcd]
# Operator Access
# [reference: FluidsFunctions.xmcd]
# [reference: SedimentationTank.xmcd]
# Layers
# [reference: LFOM.xmcd]
OpWalkwayLayer := layer_new("OpWalkwayCon", grey)
SelectOpWalkway := SelectLayer("OpWalkwayCon")
OpWalkwayFrz := FreezeLayer("OpWalkwayCon")
SubtractFromOpWalkway := SubtractF(["OpWalkwayCon"], "DeleteMe")
# [reference: FlocculatorEntranceTank.xmcd]
# [reference: StackedRapidSandFilter.xmcd]
# [reference: ChemicalDoseController_st587.xmcd]
# AutoCAD drawing functions:
# [reference: PlumbingF.xmcd]
# [reference: TankF.xmcd]
# [reference: StairsF.xmcd]
# [reference: DrainChannelF.xmcd]
# [reference: ChannelF.xmcd]
# [reference: FlocculatorAC.xmcd]
# [reference: SedimentationTankAC.xmcd]
# [reference: EntranceTankCompactAC_st587.xmcd]
# [reference: StackedRapidSandFilterAC.xmcd]
# [reference: ChemStockTanksAC.xmcd]
# Main floor
# AutoCAD script files:
Floor_Origin := [
    Plant_Origin[0] + T_SedWall - T_PlantWall;
    Plant_Origin[1] - T_SedWall + T_PlantWall;
    Z_Walkway - T_PlantFloor
]
Floor_Dim := [
    -(Plant_Origin[0] + T_SedWall - T_PlantWall - (Fi_origin[0] - L_Fi - T_FiWall + T_PlantWall));
    T_SedWall - T_PlantWall + N_SedTanks*W_Sed + (N_SedTanks - 1)*T_SedDividingWall + max(T_SedWall, T_FlocWall) + W_Floc + T_FlocWall + W_EtWalkway;
    T_PlantFloor
]
FloorBox := BoxF(Floor_Origin, Floor_Origin + Floor_Dim, [0; 0; 0]*deg)
PlantFloorScript := stack(OpWalkwayLayer, FloorBox, OpWalkwayFrz)
# Stairs to door and basement
# Dimensions and origins
L_EntranceLanding := 2 m
L_BasementLandingMin := 1 m
L_EntranceStairs := FiInletChannel_Origin[0] + T_FiBoxWall - Fi_origin[0] + L_Fi + (T_FiWall - T_PlantWall) - L_EntranceLanding
H_EntranceStairs := H_Stairs(L_EntranceStairs)
Z_Entrance := Z_Walkway - H_EntranceStairs
Z_BasementFloor := Z_FiBottom
H_BasementStairs := Z_Entrance - Z_BasementFloor
L_BasementStairs := min(L_EntranceStairs - L_BasementLandingMin - T_DrainChannelWall, L_Stairs(H_BasementStairs))
L_BasementLanding := L_EntranceStairs - L_BasementStairs - T_DrainChannelWall
EntranceStairs_Origin := [
    FiInletChannel_Origin[0] + T_FiBoxWall;
    Fi_origin[1] + N_Fi*(W_Fi + T_FiWall) + W_BasementStairs + T_PlantWall;
    Z_Walkway
]
BasementStairs_Origin := [EntranceStairs_Origin[0] - L_EntranceStairs; EntranceStairs_Origin[1]; Z_Entrance]
W_EntranceStair := W_Stair(H_EntranceStairs)
W_BasementStair := W_StairFixed(L_BasementStairs)  # Width of a single stair in the staircase
H_EntranceStair := H_Stair(H_EntranceStairs)
# Height of a single stair in the staircase
H_BasementStair := H_StairFixed(L_BasementStairs, H_BasementStairs)
# Stairs
EntranceStairs := StairsF(EntranceStairs_Origin, W_EntranceStairs + T_PlantWall, H_EntranceStairs, 180 deg)
BasementStairs := StairsFixedF(BasementStairs_Origin, W_BasementStairs + T_PlantWall, H_BasementStairs, L_BasementStairs, 0 deg)
LowerStairScript := stack(SelectOpWalkway, EntranceStairs, BasementStairs, OpWalkwayFrz)
# Stairwell walls
StairwellSouthWall := BoxF(EntranceStairs_Origin + [-T_FiBoxWall; 0 m; 0 m], [BasementStairs_Origin[0]; EntranceStairs_Origin[1] - T_PlantWall; Z_BasementFloor - T_PlantFloor], [0; 0; 0]*deg)
StairwellNorthWall := WedgeF([BasementStairs_Origin[0]; EntranceStairs_Origin[1] + W_EntranceStairs; EntranceStairs_Origin[2]], [
    BasementStairs_Origin[0] + H_EntranceStairs + T_PlantFloor;
    EntranceStairs_Origin[1] + W_EntranceStairs + T_PlantWall;
    EntranceStairs_Origin[2] + L_EntranceStairs + W_EntranceStair + T_PlantFloor
], [0; 90; 0]*deg)
StairwellSouthWallCut := WedgeF([
    BasementStairs_Origin[0] - W_BasementStair;
    EntranceStairs_Origin[1];
    Z_BasementFloor - T_PlantFloor
], [
    BasementStairs_Origin[0] + L_BasementStairs;
    EntranceStairs_Origin[1] - T_PlantWall;
    Z_Entrance - T_PlantFloor
], [0; 0; 0]*deg)
StairwellWallScript :=
    stack(SelectOpWalkway, StairwellSouthWall, StairwellNorthWall, OpWalkwayFrz, StairwellSouthWallCut, GroupDelete, SubtractFromOpWalkway) if EN_Stairwell == 1
    view("t") otherwise
# Lower floors
OpEntranceLanding := BoxF([
    Fi_origin[0] - L_Fi - (T_FiWall - T_PlantWall);
    Fi_origin[1] + N_Fi*(W_Fi + T_FiWall);
    Z_Entrance - T_PlantFloor
], [
    Fi_origin[0] - L_Fi - (T_FiWall - T_PlantWall) + L_EntranceLanding;
    Fi_origin[1] + N_Fi*(W_Fi + T_FiWall) + W_BasementStairs + T_PlantWall + W_EntranceStairs + T_PlantWall;
    Z_Entrance
], [0; 0; 0]*deg)
BasementFloor := BoxF([Fi_origin[0] + T_FiWall; Fi_origin[1] - T_FiWall + T_PlantWall; Z_BasementFloor - T_PlantFloor], [
    FiInletChannel_Origin[0] + T_FiBoxWall - T_DrainChannelWall;
    Fi_origin[1] + N_Fi*(W_Fi + T_FiWall);
    Z_BasementFloor
], [0; 0; 0]*deg)
BasementLanding := BoxF([
    FiInletChannel_Origin[0] + T_FiBoxWall - T_DrainChannelWall;
    Fi_origin[1] + N_Fi*(W_Fi + T_FiWall);
    Z_BasementFloor - T_PlantFloor
], [
    FiInletChannel_Origin[0] + T_FiBoxWall - T_DrainChannelWall - L_BasementLanding;
    Fi_origin[1] + N_Fi*(W_Fi + T_FiWall) + W_BasementStairs;
    Z_BasementFloor
], [0; 0; 0]*deg)
LowerFloorScript := stack(SelectOpWalkway, OpEntranceLanding, BasementFloor, BasementLanding, Union_All, OpWalkwayFrz)
# Floor cut
LowerAccessFloorCut := BoxF([
    Fi_origin[0] - L_Fi - (T_FiWall - T_PlantWall);
    Fi_origin[1] + N_Fi*(W_Fi + T_FiWall) + W_BasementStairs + T_PlantWall;
    Z_Walkway - T_PlantFloor - zc
], [
    FiInletChannel_Origin[0] + T_FiBoxWall;
    Fi_origin[1] + N_Fi*(W_Fi + T_FiWall) + W_BasementStairs + T_PlantWall + W_EntranceStairs;
    Z_Walkway + zc
], [0; 0; 0]*deg)
OpLowerAccessScript :=
    stack(LowerAccessFloorCut, GroupDelete, SubtractFromOpWalkway, LowerStairScript, LowerFloorScript) if EN_Stairwell == 1
    view("t") otherwise
# Sed tank floor cuts
SedSubBox_Origin := [Plant_Origin[0] + T_SedWall; Plant_Origin[1] - T_SedWall; Z_Walkway - T_PlantFloor - zc]
SedSubBox_Dim := [
    -L_Sed - 2*T_SedWall;
    N_SedTanks*W_Sed + (N_SedTanks - 1)*T_SedDividingWall + 2*T_SedWall;
    T_PlantFloor + 2*zc
]
SedDrainBox_Origin := [
    SedSludgeDrainValve_Origin[0] - ValveLength(ND_SedJetReverser);
    SedSludgeDrainValve_Origin[1] + ValveLength(ND_SedJetReverser)/2;
    Z_Walkway - T_PlantFloor - zc
]
SedDrainBox_Dim := [
    SedHopperDrainValve_Origin[0] - SedSludgeDrainValve_Origin[0] + ValveLength(ND_SedJetReverser) + ValveSocket(ND_SedHopperDrain);
    SedHopperDrainValve_Origin[1] - SedSludgeDrainValve_Origin[1] - ValveLength(ND_SedJetReverser)/2 - ValveLength(ND_SedHopperDrain)/2;
    T_PlantFloor + 2*zc
]
SedSubBox := BoxF(SedSubBox_Origin, SedSubBox_Origin + SedSubBox_Dim, [0; 0; 0]*deg)
SedDrainSubBox := BoxF(SedDrainBox_Origin, SedDrainBox_Origin + SedDrainBox_Dim, [0; 0; 0]*deg)
ArraySedDrainBox := ArrayLast(N_SedTanks, 1, W_Sed + T_SedDividingWall)
MirrorSedBox := Mirror3dLast("yz", [Floc_Origin[0] - L_Floc - W_PlantDC/2 - T_PlantWall; 0 m], "n")
SedFloorCutScript := stack(SedSubBox, SedDrainSubBox, ArraySedDrainBox)
# Flocculator floor cuts
FlocSubBox_Origin := [Floc_Origin[0] + T_FlocWall; Floc_Origin[1] - T_FlocWall; Z_Walkway - T_PlantFloor - zc]
FlocSubBox_Dim := [
    -2*T_FlocWall - L_Floc;
    N_FlocChannels*W_FlocChannel + (N_FlocChannels - 1)*T_FlocDividingWall + 2*T_FlocWall;
    T_PlantFloor + 2*zc
]
FlocSubBox := BoxF(FlocSubBox_Origin, FlocSubBox_Origin + FlocSubBox_Dim, [0; 0; 0]*deg)
MirrorFlocBox := Mirror3dAll("yz", [Floc_Origin[0] - L_Floc - W_PlantDC/2 - T_PlantWall; 0 m], "n")
FlocFloorCutScript := stack(FlocSubBox)
# Dose controller floor cuts
DosingSubBox_Dim := [OD_Fitting(ND_EtFloat); L_CdcLever + S_Fitting; T_PlantFloor + 2*zc]
DosingSubBox_Origin := [
    Et_Origin[0] - L_Et + L_EtFrontWallToFloat + OR_Fitting(ND_EtFloat) - OR_Fitting(ND_EtFloat);
    Et_Origin[1] + W_Et + T_FlocWall;
    Z_Walkway - T_PlantFloor - zc
]
DosingSubBox := BoxF(DosingSubBox_Origin, DosingSubBox_Origin + DosingSubBox_Dim, [0; 0; 0]*deg)
ChemDrainSubBox := BoxF([
    ChemPlatformFloor_Origin[0] + T_PlantWall;
    Et_Origin[1] + W_Et - 6*OD_Fitting(1/2*in) - S_Fitting;
    Z_Walkway - T_PlantFloor
], [
    ChemPlatformFloor_Origin[0] + T_PlantWall + OD_Fitting(1/2*in) + zc;
    Et_Origin[1] + W_Et;
    Z_Walkway
], [0; 0; 0]*deg)
CdcFloorCutScript := stack(DosingSubBox, ChemDrainSubBox)
# Filter floor cuts
FilterSubBox_Origin := [Fi_origin[0] + T_FiWall; Fi_origin[1] - T_FiWall; Z_Walkway - T_PlantFloor - zc]
FilterSubBox_Dim := [-2*T_FiWall - L_Fi; T_FiWall + N_Fi*(W_Fi + T_FiWall); T_PlantFloor + 2*zc]
FilterSubBox := BoxF(FilterSubBox_Origin, FilterSubBox_Origin + FilterSubBox_Dim, [0; 0; 0]*deg)
FiSiphonSubBox_Origin := [
    Fi_origin[0] + T_FiWall + OR(3 in);
    Fi_origin[1] + S_Fitting + OR_Fitting(ND_FiSiphon);
    Z_Walkway - T_PlantFloor - zc
]
FiSiphonSubBox := CylinderF(FiSiphonSubBox_Origin, OR(3 in), T_PlantFloor + 2*zc, [0; 90]*deg)
ArrayFiSiphonSubBox := ArrayLast(N_Fi, 1, W_Fi + T_FiWall)
FiAuxSubBox_Origin := [
    FiInletChannel_Origin[0] + T_FiBoxWall;
    FiInletChannel_Origin[1] - T_FiBoxWall;
    Z_Walkway - T_PlantFloor - zc
]
FiAuxSubBox_Dim := [
    -W_FiInletChannel - L_FiOverflow - L_FiExit - 4*T_FiBoxWall;
    L_FiInletChannel + 2*T_FiBoxWall;
    T_PlantFloor + 2*zc
]
FiAuxSubBox := BoxF(FiAuxSubBox_Origin, FiAuxSubBox_Origin + FiAuxSubBox_Dim, [0; 0; 0]*deg)
MirrorFilterBox := Mirror3dLast("yz", [Floc_Origin[0] - L_Floc - W_PlantDC/2 - T_PlantWall; 0 m], "n")
FiFloorCutScript := stack(FilterSubBox, FiSiphonSubBox, ArrayFiSiphonSubBox, FiAuxSubBox, GroupDelete, SubtractFromOpWalkway)
FiAuxPeninsula_Origin := [
    FiOverflowBox_Origin[0];
    FiEntranceBox_origin[1] + 2*W_FiEntrance + W_FiOverflow + 3*T_FiBoxWall;
    Z_Walkway - T_PlantFloor
]
FiAuxPeninsula_Dim := [-L_FiOverflow - L_FiExit - 2*T_FiBoxWall; W_FiOverflow; T_PlantFloor]
FiAuxPeninsula := BoxF(FiAuxPeninsula_Origin, FiAuxPeninsula_Origin + FiAuxPeninsula_Dim, [0; 0; 0]*deg)
ArrayFiAuxPeninsula := ArrayLast(max(N_FiPeninsulas, 1), 1, 2*W_FiEntrance + W_FiOverflow + 4*T_FiBoxWall)
FiAuxPeninsulaScript := stack(SelectOpWalkway, FiAuxPeninsula, ArrayFiAuxPeninsula, Union_All, OpWalkwayFrz)
FiFloorScript :=
    stack(FiFloorCutScript, FiAuxPeninsulaScript) if N_FiPeninsulas > 0
    FiFloorCutScript otherwise
# Chem platform floor cuts
ChemPlatformSubBox_Origin := [ChemPlatformFloor_Origin[0]; ChemPlatformFloor_Origin[1]; Z_Walkway - T_PlantFloor - zc]
ChemPlatformSubBox_Dim := [-W_ChemPlatform - zc; -L_ChemPlatform - T_PlantWall; T_PlantFloor + 2*zc]
ChemPlatformSubBox := BoxF(ChemPlatformSubBox_Origin, ChemPlatformSubBox_Origin + ChemPlatformSubBox_Dim, [0; 0; 0]*deg)
AC_OperatorAccess := stack(PlantFloorScript, OpLowerAccessScript, SedFloorCutScript, FlocFloorCutScript, ChemPlatformSubBox, CdcFloorCutScript, FiFloorScript, StairwellWallScript)
