# Pipe Specifications Explained
# About Pipe Schedules
# Water pipes are run at different thicknesses - usually to handle different pressures. In contrast to the 2" Schedule 40 pipe above, a 2" Schedule 80 pipe has the same OD of 2.375" but a wall thickness of .218". This gives it an inner diameter of 1.939" (2.375" OD - 2 x .218" (the wall thickness)). This means that a 2" Schedule 80 pipe has a smaller ID, less than 2". Why wouldn't they keep the same Inside Diameter (ID) and just make the outside Diameter larger if they needed heavier walls? By keeping the Outside Diameters the same, a 2'' fitting that goes over the OD of the pipe will work for 2" pipe, regardless of the wall thickness.
# About SDRs
# SDR is an abbreviation for "Standard Dimension Ratio". It is a convenient means for defining the minimum wall thickness for Pipe (not Tube). It is equal to the Actual Pipe Diameter (not the nominal pipe size) divided by the wall thickness. For example 2" pipe, which has an actual OD of 2.375" with a wall thickness of .091", would have an SDR value of 2.375" / .091" or an SDR of 26. In the reverse, by knowing the pipe size and SDR number, you can calculate the minimum wall thickness. For example 3" SDR 21 pipe which has an actual OD of 3.500" would have a minimum wall thickness equal to 3.500" / 21 or .165". It is important to note the wall calculated is the minimum wall thickness.
2.375/0.091 = 26.0989
# Referece: <http://availableplastics.com/pvc_pipe_tube_nominclature.html> 02/11/08.
# Assigning Indecies
# Pipe Specification  Corresponding Index (EN.PipeSpec)  Used for
# Schedule 10 (thin wall)  0
# Schedule 30  1
# Schedule 40  2  (PS.FiBranch)  FiBranch (slotted pipes) (1” and 1.5”)
# Schedule 80  3
# Schedule 120  4
# Schedule 160 (thick wall)  5
# SDR 17 (thick wall)  6 (PS.Modules)*  1/2” and ¾” pipes used for building modules
# SDR 21  7
# SDR 26  8 (PS.Default) Is there a better name?  all pipes larger than ¾” except FiBranch
# SDR 32.5  9
# SDR 41 (thin wall)  10
PS_FiBranch := 2
PS_Modules := 6
PS_Default := 8
# [component: outputs EN_PipeSpecDescription]
# Straight Pipes Database
# in all functions
# prevent inclusion of pipes that are not being used
# Nominal Pipe Size  Actual Outer Diameter
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# Default Country = 0
# Some of the inner diameters of the pipes are not the same as produced by the script function above, especially for the smaller pipes because making a wall that thin is not practical. Later perhaps we could include a check, that if the wall thickness based on the Avg Inner D. here is greater than one used we can use this ID. Do not have data for all choices.
CountryPipes := [
    0, 0;
    0, 0;
    0, 0;
    1, 1;
    1, 1;
    1, 1;
    0, 0;
    1, 1;
    1, 1;
    0, 0;
    1, 1;
    0, 0;
    1, 1;
    0, 0;
    1, 1;
    1, 1;
    1, 0;
    1, 1;
    0, 0;
    1, 0;
    0, 1;
    0, 0;
    1, 1;
    1, 1
]
Pipesizes := [
    1/8*in, .405 in;
    1/4*in, .540 in;
    3/8*in, .675 in;
    1/2*in, .840 in;
    3/4*in, 1.050 in;
    1 in, 1.315 in;
    1.25 in, 1.66 in;
    1.5 in, 1.9 in;
    2 in, 2.375 in;
    2.5 in, 2.875 in;
    3 in, 3.5 in;
    3.5 in, 4 in;
    4 in, 4.5 in;
    5 in, 5.563 in;
    6 in, 6.625 in;
    8 in, 8.625 in;
    10 in, 10.75 in;
    12 in, 12.75 in;
    14 in, 14 in;
    15 in, 15 in;
    16 in, 16 in;
    18 in, 18 in;
    20 in, 20 in;
    24 in, 24 in
]
AvgInnerDiameter := [
    0, 0, 0, 0, 0, 0, 0, 0, 0, 0, 0;
    0, 0, 0, 0, 0, 0, 0, 0, 0, 0, 0;
    0, 0, 0, 0, 0, 0, 0, 0, 0, 0, 0;
    0, 0, 0, 0, 0, 0, 0, 0, 0, 0, 0;
    0, 0, 0, 0, 0, 0, 0, 0.91, 0, 0, 0;
    0, 0, 0, 0, 0, 0, 0, 1.169, 1.175, 1.169, 0;
    0, 0, 0, 0, 0, 0, 0, 1.482, 1.512, 1.482, 0;
    0, 0, 0, 0, 0, 0, 0, 1.7, 1.734, 1.7, 0;
    0, 0, 0, 0, 0, 0, 0, 2.129, 2.173, 2.129, 0;
    0, 0, 0, 0, 0, 0, 0, 2.581, 2.635, 2.581, 0;
    0, 0, 0, 0, 0, 0, 0, 3.146, 3.210, 3.146, 0;
    0, 0, 0, 0, 0, 0, 0, 3.597, 3.672, 3.597, 0;
    0, 0, 0, 0, 0, 0, 0, 4.046, 4.134, 4.046, 0;
    0, 0, 0, 0, 0, 0, 0, 5.001, 5.108, 5.001, 0;
    0, 0, 0, 0, 0, 0, 0, 5.955, 6.084, 5.955, 0;
    0, 0, 0, 0, 0, 0, 0, 7.756, 7.921, 7.756, 0;
    0, 0, 0, 0, 0, 0, 0, 0, 9.874, 0, 0;
    0, 0, 0, 0, 0, 0, 0, 0, 11.711, 0, 0;
    0, 0, 0, 0, 0, 0, 0, 0, 12.860, 0, 0;
    0, 0, 0, 0, 0, 0, 0, 0, 13.785, 0, 0;
    0, 0, 0, 0, 0, 0, 0, 0, 14.696, 0, 0;
    0, 0, 0, 0, 0, 0, 0, 0, 16.533, 0, 17.061;
    0, 0, 0, 0, 0, 0, 0, 0, 18.370, 0, 18.956;
    0, 0, 0, 0, 0, 0, 0, 0, 22.043, 0, 22.748
]*in
MinWallTSch10 := [0.049; 0.065; 0.065; 0.083; 0.083; 0.109; 0.109; 0.109; 0.109; 0.12; 0.12; 0.0; 0.12; 0.134; 0.134; 0.148; 0.165; 0.18; 0.25; 0; 0.25; 0.25; 0.25; 0.25]*in
MinWallTSch30 := [0.057; 0.073; 0.073; 0.095; 0.095; 0.114; 0.117; 0.125; 0; 0; 0; 0; 0; 0; 0; 0.277; 0.307; 0.330; 0.375; 0; 0.375; 0.437; 0.5; 0.562]*in
MinWallTSch40 := [0.068; 0.088; 0.091; 0.109; 0.113; 0.133; 0.14; 0.145; 0.154; 0.203; 0.216; 0; 0.237; 0.258; 0.28; 0.322; 0.365; 0.406; 0.437; 0; 0.5; 0.562; 0.593; 0.687]*in
MinWallTSch80 := [0.095; 0.119; 0.126; 0.147; 0.154; 0.179; 0.191; 0.2; 0.218; 0.276; 0.3; 0; 0.337; 0.375; 0.432; 0.5; 0.5; 0.687; 0.75; 0; 0.843; 0.937; 1.031; 1.218]*in
MinWallTSch120 := [0; 0; 0; 0.17; 0.17; 0.2; 0.215; 0.2258; 0.25; 0.3; 0.35; 0; 0.437; 0.5; 0.562; 0.718; 0.843; 1; 1.093; 0; 1.218; 1.375; 1.5; 1.812]*in
MinWallTSch160 := [0; 0; 0; 0.188; 0.219; 0.25; 0.25; 0.281; 0.344; 0.375; 0.438; 0; 0.531; 0.625; 0.719; 0.906; 1.125; 1.312; 1.406; 0; 1.593; 1.781; 1.968; 2.343]*in
# Assumption: A pipe can have a minwallthick less
# than 0.049 in. Where this is not violated gaps were
# filled in using minwallthickness=actual outer diameter / SDR
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Sch10 := 0
SDR13_5 := 6
Sch30 := 1
SDR17 := 7
Sch40 := 2
SDR21 := 8
Sch80 := 3
SDR26 := 9
Sch120 := 4
SDR32_5 := 10
Sch160 := 5
SDR41 := 11
# References
UsingPipes := CountryPipes[:, Country]
# http://www.harvel.com/tech-specs-pvc-pipe-sdr.asp
# http://availableplastics.com/pvc_pipe_dimensions.html
AvailND :=
    i ← 0
    j ← 0
    while i ≤ last(Pipesizes[:, 0]) and j ≤ last(Pipesizes[:, 0])
        if CountryPipes[:, Country][j] ≠ 0
            ND[i] ← Pipesizes[:, 0][j]
            i ← i + 1
        j ← j + 1
    ND
AvailOD :=
    i ← 0
    j ← 0
    while i ≤ last(Pipesizes[:, 0]) and j ≤ last(Pipesizes[:, 0])
        if CountryPipes[:, Country][j] ≠ 0
            OD[i] ← Pipesizes[:, 1][j]
            i ← i + 1
        j ← j + 1
    OD
MinWallTSDR(SDR) :=
    for i ∈ 0 .. last(Pipesizes[:, 0])
        a[i] ← max(Pipesizes[:, 1][i]/SDR, 0.049 in)
    return a
MinWallThickness := [
    .049, .057, .068, .095, 0, 0, 0, 0, 0, 0, 0;
    .065, .073, .088, .119, 0, 0, 0, 0, 0, 0, 0;
    .065, .073, .091, .126, 0, 0, 0, 0, 0, 0, 0;
    .083, .095, .109, .147, .170, .188, 0.675/17, 0, 0, 0, 0;
    .083, .095, .113, .154, .170, .219, 0.072, 0.07, 0, 0, 0;
    .109, .114, .133, .179, .2, .25, 0.087, 0.073, 0.07, 0, 0;
    .109, .117, .14, .191, .215, .25, 0.108, 0.089, 0.074, 0.07, 0;
    .109, .125, .145, .2, .2258, .281, 0.122, 0.100, 0.083, 0.07, 0;
    .109, 0, .154, .218, .25, .344, 0.150, 0.123, 0.101, 0.083, 2.375/41;
    .12, 0, .203, .276, .3, .375, 0.179, 0.147, 0.120, 0.098, 2.875/41;
    .12, 0, .216, .3, .35, .438, 0.219, 0.177, 0.145, 0.118, 0.095;
    0, 0, 0, 0, 0, 0, 0.249, 0.202, 0.164, 0.133, 0.108;
    .12, 0, .237, .337, .437, .531, 0.281, 0.227, 0.183, 0.148, 0.120;
    .134, 0, .258, .375, .5, .625, 0.347, 0.281, 0.228, 0.182, 0.146;
    .134, 0, .28, .432, .562, .719, 0.414, 0.335, 0.271, 0.216, 0.172;
    .148, .277, .322, .5, .718, .906, 0.539, 0.435, 0.352, 0.281, 0.223;
    .165, .307, .365, .5, .843, 1.125, 0.670, 0.542, 0.438, 0.351, 0.278;
    .18, .330, .406, .687, 1, 1.312, 0.795, 0.643, 0.520, 0.416, 0.330;
    .25, .375, .437, .75, 1.093, 1.406, 14/17, 14/21, 0.538, 14/32.5, 14/41;
    0, 0, 0, 0, 0, 0, 15/17, 15/21, 15/26, 15/32.5, 15/41;
    .25, .375, .5, .843, 1.218, 1.593, 16/17, 16/21, 0.615, 16/32.5, 16/41;
    .25, .437, .562, .937, 1.375, 1.781, 18/17, 18/21, 0.692, 18/32.5, 0.439;
    .25, .5, .593, 1.031, 1.5, 1.968, 20/17, 20/21, 0.769, 20/32.5, 0.488;
    .25, .562, .687, 1.218, 1.812, 2.343, 24/17, 24/21, 0.923, 22/32.5, 0.585
]*in
MinWallTSDR(17) = [0.049; 0.049; 0.049; 0.0494118; 0.0617647; 0.0773529; 0.0976471; 0.111765; 0.139706; 0.169118; 0.205882; 0.235294; 0.264706; 0.327235; 0.389706; 0.507353; 0.632353; 0.75; 0.823529; 0.882353; 0.941176; 1.05882; 1.17647; 1.41176] in
check :=
    for i ∈ 0 .. last(MinWallThickness[:, 0])
        checkarray[i] ← 0 if MinWallThickness[:, 7][i] - MinWallTSDR(21)[i] < 0.05 in
        checkarray[i] ← 1 otherwise
    return checkarray
MinWallTSDR(17) = [0.049; 0.049; 0.049; 0.0494118; 0.0617647; 0.0773529; 0.0976471; 0.111765; 0.139706; 0.169118; 0.205882; 0.235294; 0.264706; 0.327235; 0.389706; 0.507353; 0.632353; 0.75; 0.823529; 0.882353; 0.941176; 1.05882; 1.17647; 1.41176] in
check = [0; 0; 0; 0; 0; 0; 0; 0; 0; 0; 0; 0; 0; 0; 0; 0; 0; 0; 0; 0; 0; 0; 0; 0]
# Straight Pipe Functions
# Actual inner diameter of a pipe
# Returns a value of inner diameter for a given pipe specification and a nominal pipe size.
innerdiameter(NominalPipeSize, PipeSpecification) :=
    WallThick ← MinWallThickness[index(NominalPipeSize, Pipesizes[:, 0]), PipeSpecification]
    ID ← Pipesizes[index(NominalPipeSize, Pipesizes[:, 0]), 1] - (2*WallThick) if WallThick ≠ 0
    ID ← 0 if WallThick == 0
    IDThick ← AvgInnerDiameter[index(NominalPipeSize, Pipesizes[:, 0]), PipeSpecification]
    return 0 if UsingPipes[index(NominalPipeSize, Pipesizes[:, 0])] == 0
    return IDThick if ((IDThick < ID) and (IDThick ≠ 0))
    return ID otherwise
# innerdiameter(NominalPipeSize, PipeSpecification)
# 1. The wall thickness is found from the minwallthickness matrix above.
# 2. The inner diameter is found by subtracting 2* the wall thickness (two walls for a given pipe diameter) if the wall thickness found from matrix MinWallThickness is not zero.
# 3. If the value in MinWallThickness is zero the inner diameter is given as zero, since the pipe does not exist.
# 4. The value for inner diameter from matrix for avg inner diameter is found to compare to the one calculated. If the wall thickness is too thin it uses this value.
# 5. If the inner diameter from 4. is smaller than the one from 2/3 we know minwall thickness is not equal to zero and the walls are thicker, so we return this value.
# 6. If the inner diameter from 4 is zero it returns the value calculated in step 2/3.
innerdiameter(AvailND[3], PS_Default) =  # error: This variable is undefined.
T_Pipe(NominalPipeSize, PipeSpecification) := MinWallThickness[index(NominalPipeSize, Pipesizes[:, 0]), PipeSpecification]
NominalPipeSize(PipeSize) :=
    for i ∈ 0 .. length(Pipesizes[:, 0]) - 1
        NominalPipeSize ← Pipesizes[:, 0][i] if UsingPipes[i] ≠ 0
        break if PipeSize ≤ NominalPipeSize
# NominalPipeSize(PipeSize)
# Until the nominal pipe size is larger than the given pipe size the index is increased
# Once the criterion is met the for loop is broken and the nominal pipe size last found is returned
# If none are larger than the given the largest nominal pipe size is returned
# Example:NominalPipeSize(6.941 in)=8 in
# innerD(PipeSize, PipeSpecification)
# 1. Have to find the first nominal pipe size for the pipe size given
# 2. Calculate the inner diameter based on innerdiameter(NominalPipeSize, PipeSpecification)
# Example:innerD(6.941 in, 8)=7.921 in
innerD(PipeSize, PipeSpecification) :=
    NominalPipeSize ← NominalPipeSize(PipeSize)
    ID ← innerdiameter(NominalPipeSize, PipeSpecification)
    return ID
innerR(PipeSize, PipeSpecification) := innerD(PipeSize, PipeSpecification)/2
IDindex(index, PipeSpecification) :=
    WallThick ← MinWallThickness[index, PipeSpecification] if UsingPipes[index] ≠ 0
    WallThick ← 0 otherwise
    ID ← Pipesizes[index, 1] - (2*WallThick) if WallThick ≠ 0
    ID ← 0 if WallThick == 0
    NominalSize ← Pipesizes[index, 0]
    IDThick ← [ID, NominalSize]
    ID ← AvgInnerDiameter[index, PipeSpecification] if (AvgInnerDiameter[index, PipeSpecification] < ID)
    return IDThick
# IDindex(index, PipeSpecification)
# This function is similar to innerdiameter(NominalPipeSize, PipeSpecification)
# except that it also returns the nominal pipe size. Thus it outputs a 1x2
# array of inner diameter and nominal pipe size. However instead of inputing
# the nominal pipe size you input the corresponding index number for the
# row of the Pipesizes matrix.
# To Just Return an Array of Inner Diameters:
IDindex1(index, PipeSpecification) :=
    WallThick ← MinWallThickness[index, PipeSpecification] if UsingPipes[index] ≠ 0
    WallThick ← 0 otherwise
    ID ← 0 if WallThick == 0
    ID ← Pipesizes[index, 1] - (2*WallThick) if WallThick ≠ 0
    IDThick ← [ID, WallThick]
    ID ← AvgInnerDiameter[index, PipeSpecification] if (AvgInnerDiameter[index, PipeSpecification] > ID)
    return ID
# IDindex1(index, PipeSpecification)
# This function is similar IDindex(index, PipeSpecification) except
# that it only returns the inner diameter based on the index given.
# Actual outer diameter of a pipe
outerdiameter(NominalPipeSize) :=
    return Pipesizes[index(NominalPipeSize, Pipesizes[:, 0]), 1] if UsingPipes[index(NominalPipeSize, Pipesizes[:, 0])] ≠ 0
    return 0 otherwise  # Outerdiameter returns the average outer diameter of a pipe based on its nominal pipe size
# Outerradius finds the radius based on the Outerdiameter
outerradius(NominalPipeSize) := outerdiameter(NominalPipeSize)/2
# Available Pipe Sizes: Returns an Array of Inner Diameters and Nominal Pipe Sizes
AvailPipeSizes(PipeSpecification) :=
    j ← 0
    for i ∈ 0, 1 .. length(Pipesizes[:, 0]) - 1
        if UsingPipes[i] ≠ 0
            InnerDiameter ← IDindex(i, PipeSpecification)
            if InnerDiameter[:, 0] ≠ [0]
                Sizes[j, 0] ← InnerDiameter[:, 0][0]
                Sizes[j, 1] ← InnerDiameter[:, 1][0]
                j ← j + 1
    return Sizes
# AvailPipeSizes(PipeSpecification)
# This function returns an array of available pipe sizes given a
# pipe specification. For every row in the Pipesizes matrix it calculates
# the inner diameter from IDindex which returns the inner diameter and
# the nominal pipe size. If the inner diameter is not equal to zero the pipe
# exists and the inner diameters are returned in the first column and
# the nominal pipe sizes are returned in the second.
findindexID(NominalPipeSize, PipeSpecification) :=
    ID ← innerdiameter(NominalPipeSize, PipeSpecification)
    i ← 0
    innerDs ← AvailPipeSizes(PipeSpecification)[:, 0]
    while innerDs[i] < ID
        i ← i + 1
    return i
A_circle(D) := π*D^2/4
A_pipes(PipeSpecification) :=
    innerDar ← AvailPipeSizes(PipeSpecification)[:, 0]
    for i ∈ 0 .. length(innerDar) - 1
        A[i] ← A_circle(innerDar[i])
    return A
NominalDiameter(ID_pipe, PipeSpecification) :=
    i ← 0
    while AvailPipeSizes(PipeSpecification)[:, 0][i] < ID_pipe
        i ← i + 1
        break if i == last(AvailPipeSizes(PipeSpecification)[:, 0])
    return AvailPipeSizes(PipeSpecification)[i, 1]  # Given minimum ID of a pipe it returns the nominal pipe size
# Fittings
# http://www.spearsmfg.com/prod_dimensions_spec/40-4-0511_0511_web.pdf
# for wye dimensions
# Outer
# Diameter
# short wye length
# diag wye length
# Flex
# Coupling
# Length
# http://www.lascofittings.com/products/catalog/PDF/Tech80.pdf
# nominal pipe size
# tee length
# cap diameter
# male adapter
# lengths
# coupling
# lengths
# (sched 80)
# long wye length
# for coupling lengths (assumes sched 80)
# Inner
# Diamter
# 5 in coupling is a sched 40 (since no sched 80 is available)
# elbow radius
# socket depth
# cap height
# sched 40 for adapter lengths because they have a wider range of available NDs
# socket depths do not work out exactly for couplings/adapters but they are close!
# Calculations of regressed pipe fitting dimensions:
# Elbow Radius Equation
# estimate as y = 1.5*ND
# Tee Length Equation
# estimate as y = 0.718*ND
# Socket Depth Equation
# estimate as y = 0.2*ND
# Cap Diameter Equation
# estimate as y = 1.04*ND
# Cap Height Equation
# estimate as y = 0.49*ND
# Male Adapter Lengths Equation
# estimate as y = 0.7*ND
# Coupling Lengths Equation
# estimate as y = 0.8*ND
pipefittings := [
    1/8*in, 0 in, 0 in, 0 in, 0 in, 0 in, 0 in, 0 in, 0 in, 0 in, 0 in, 0 in, 0 in, 0 in;
    1/4*in, 0 in, 0 in, 0 in, 0 in, 0 in, 0 in, 1.325 in, 0 in, 0 in, 0 in, 0 in, 0 in, 0 in;
    3/8*in, 0 in, 0 in, 0 in, 7/8*in, 1 in, 0 in, 1.5938 in, 0 in, 0 in, 0 in, 0 in, 0 in, 0 in;
    1/2*in, 1.5*1/2*in, 1 in, 0.2*1/2*in, (1 + 3/32)*in, (1 + 1/32)*in, (1 + 23/32)*in, 1.8438 in, 0 in, 0 in, 0 in, .25 in, (1 + 7/16)*in, (1 + 3/16)*in;
    3/4*in, (1 + 1/8)*in, (1 + 1/8)*in, 0.2*3/4*in, (1 + 5/16)*in, (1 + 5/16)*in, (1 + 5/8)*in, 2.0938 in, 2.375 in, 1.217 in, 1.05 in, 5/16*in, (1 + 11/16)*in, (1 + 3/8)*in;
    1 in, 1.5 in, 1.5 in, 27 mm, (1 + 9/16)*in, (1 + 9/16)*in, (2 + 3/16)*in, 2.3438 in, 2.375 in, 1.482 in, 1.315 in, 9/32*in, (2 + 3/32)*in, (1 + 13/16)*in;
    1.25 in, (2 + 1/8)*in, 0.718*5/4*in, 0.2*5/4*in, (1 + 31/32)*in, (1 + 3/4)*in, (2 + 17/32)*in, 2.5938 in, 3.5 in, 1.827 in, 1.66 in, 3/8*in, (2 + 5/8)*in, 2.25 in;
    1.5 in, 2.25 in, 2.25 in, 32 mm, (2 + 1/4)*in, (1 + 7/8)*in, (2 + 9/16)*in, 2.8438 in, 3.4375 in, 2.067 in, 1.9 in, .5 in, (2 + 17/16)*in, (2 + 19/32)*in;
    2 in, 3 in, 2.5 in, 46 mm, (2 + 22/32)*in, (2 + 1/32)*in, (2 + 11/16)*in, 3.65 in, 3.5 in, 2.542 in, 2.375 in, 19/32*in, (3 + 26/32)*in, (3 + 7/32)*in;
    2.5 in, 3.75 in, 3 in, 46 mm, (3 + 5/16)*in, (2 + 9/16)*in, (3 + 7/8)*in, 3.6875 in, 0 in, 0 in, 0 in, 1 in, 5.75 in, 5.25 in;
    3 in, 4.5 in, (3 + 3/8)*in, 46 mm, 4 in, (2 + 29/32)*in, (3 + 15/16)*in, 3.9375 in, 4 in, 3.75 in, 3.5 in, 7/8*in, (4 + 15/16)*in, (4 + 9/16)*in;
    3.5 in, 1.5*7/2*in, 0.718*3.5*in, 0.2*5/4*in, 1.04*7/2*in, 0.49*7/2*in, 0.7*3.5*in, 0.8*7/2*in, 0 in, 0 in, 0 in, 0 in, 0 in, 0 in;
    4 in, 6 in, (4 + 1/8)*in, 2.031 in, (5 + 1/16)*in, (3 + 1/8)*in, (4 + 3/32)*in, 4.79 in, 4 in, 4.75 in, 4.5 in, (1 + 7/32)*in, (6 + 7/32)*in, (5 + 23/32)*in;
    5 in, 195 mm, 127 mm, 3 in, (6 + 5/32)*in, (4 + 1/2)*in, (5 + 3/16)*in, (6 + 9/32)*in, 4 in, 5.813 in, 5.563 in, (3 + 3/4)*in, 13.125 in, (9 + 3/8)*in;
    6 in, (6 + 9/16)*in, 7.25*in, 3.031 in, (7 + 1/4)*in, 5 in, (5 + 27/32)*in, 6.41 in, 5.75 in, 6.875 in, 6.625 in, (1 + 5/16)*in, (9 + 6/16)*in, (8 + 21/32)*in;
    8 in, (8 + 15/32)*in, 8.5 in, 4 in, (9 + 5/16)*in, (6 + 3/8)*in, (7 + 1/8)*in, 8.40 in, 6 in, 8.875 in, 8.625 in, (1 + 15/16)*in, (13 + 9/32)*in, (11 + 11/32)*in;
    10 in, (14 + 3/4)*in, 11.625 in, 5.25 in, (11 + 13/16)*in, (5 + 1/4)*in, (10 + 3/8)*in, 10.55 in, 5.875 in, 11 in, 10.75 in, 2.5*in, (16 + 15/32)*in, (16 + 7/8)*in;
    12 in, (16 + 3/4)*in, 13.62 in, 6.25 in, (13 + 7/8)*in, (6 + 7/8)*in, (11 + 1/8)*in, 12.54 in, 6.3125 in, 13 in, 12.75 in, (2 + 11/16)*in, (18 + 29/32)*in, (16 + 1/8)*in;
    14 in, (19 + 1/4)*in, 21.76 in, 7 in, 15 in, (7 + 3/8)*in, 0.9*14*in, 17.75 in, 0 in, 0 in, 0 in, (7 + 3/16)*in, (28 + 6/16)*in, (21 + 3/16)*in;
    15 in, 1.38*15*in, 23.01 in, 0.2*15*in, 1.07*15*in, 0.49*15*in, 0.9*15*in, 1.25*15*in, 0 in, 0 in, 0 in, 0 in, 0 in, 0 in;
    16 in, (22 + 1/8)*in, 24.26 in, 8 in, (17 + 1/16)*in, 9 in, 0.9*16*in, 20.25 in, 0 in, 0 in, 0 in, 8.75 in, 33.25 in, 24.75 in;
    18 in, (26 + 1/4)*in, 26.76 in, 9 in, (19 + 1/16)*in, 9 in, 0.9*18*in, 22.75 in, 9.875 in, 18.25 in, 18 in, (9 + 7/16)*in, (36 + 14/16)*in, (27 + 7/16)*in;
    20 in, (28 + 3/4)*in, 29.26 in, 10 in, (21 + 3/16)*in, (12 + 1/4)*in, 0.9*20*in, 25.25 in, 0 in, 0 in, 0 in, (11 + 7/16)*in, (41 + 12/16)*in, (30 + 5/16)*in;
    24 in, (34 + 1/4)*in, 34.26 in, 12 in, (25 + 5/16)*in, 14.125 in, 0.9*24*in, 30.25 in, 0 in, 0 in, 0 in, 11 in, 46 in, 35 in
]
ElbowRadius(NominalPipeSize) := pipefittings[index(NominalPipeSize, Pipesizes[:, 0]), 1]
ShortTeeLength(NominalPipeSize) := pipefittings[index(NominalPipeSize, Pipesizes[:, 0]), 2]
TeeLength(NominalPipeSize) := 2*ShortTeeLength(NominalPipeSize)
SocketDepth(NominalPipeSize) := pipefittings[index(NominalPipeSize, Pipesizes[:, 0]), 3]
CrossLength(NominalPipeSize) := 2*ShortTeeLength(NominalPipeSize)
OuterDiameterFittingPVC(NominalPipeSize) := pipefittings[index(NominalPipeSize, Pipesizes[:, 0]), 4]
ConRadius(NominalPipeSize) := 0.5*pipefittings[index(NominalPipeSize, Pipesizes[:, 0]), 4]  # based on cap outer diameter
CapDiameter(NominalPipeSize) := pipefittings[index(NominalPipeSize, Pipesizes[:, 0]), 4]
CapHeight(NominalPipeSize) := pipefittings[index(NominalPipeSize, Pipesizes[:, 0]), 5]
# updated by mrf222 from 1.5*ND
# updated by mrf222 from .7*ND
CapThickness(NominalPipeSize) := CapDiameter(NominalPipeSize)/2 - outerradius(NominalPipeSize)
# elbow radius and socket depth; changes made using this site:
MaleAdapterLength(NominalPipeSize) := pipefittings[index(NominalPipeSize, Pipesizes[:, 0]), 6]
# http://63.156.201.113/003%20PVC%20White%20Schedule%2040%20Fittings,%20Unions,%20Saddles.pdf
# Tee length, coupling, change made using this source:
# Georg Fischer Piping systems
# Note that 15, 5, and 3.5 inch ND pipes are all estimates.
# coupling length for 2in *estimated* to be 3.65
# Note that there do not seem to be male adapters above 12 inch ND
CouplingLength(NominalPipeSize) := pipefittings[index(NominalPipeSize, Pipesizes[:, 0]), 7]
ValveLength(ND) := 0.1399/0.1143*2*outerradius(ND)  # based on library butterfly valve dimensions
CouplingLengthFlex(NominalPipeSize) := pipefittings[index(NominalPipeSize, Pipesizes[:, 0]), 8]
ValveSocket(ND) := .1383/1.1600*2*outerradius(ND)
SocketDepthFlex(NominalPipeSize) := pipefittings[index(NominalPipeSize, Pipesizes[:, 0]), 8]/2  # This is a design assumption.
BushingLength(ND) := 0.55/.25*2*outerradius(ND)
# Only inner diameter was given for flexible couplings;
# however, the exact outer diameter is not particularly
# important, so this design assumption was made.
BushingSocket(ND) := 0.05/.25*2*outerradius(ND)
OuterRadiusFlex(NominalPipeSize) := pipefittings[index(NominalPipeSize, Pipesizes[:, 0]), 9]/2
OuterDiameterFlex(NominalPipeSize) := pipefittings[index(NominalPipeSize, Pipesizes[:, 0]), 9]
ChkValveLength(ND) := 1.0319/0.5556*2*outerradius(ND)
InnerDiameterFlex(NominalPipeSize) := pipefittings[index(NominalPipeSize, Pipesizes[:, 0]), 10]
ChkValveSocket(ND) := 0.2060/0.5556*2*outerradius(ND)
InnerRadiusFlex(NominalPipeSize) := pipefittings[index(NominalPipeSize, Pipesizes[:, 0]), 10]/2
BulkheadLength(ND) := outerradius(ND)*0.1641 m/(0.0650 m)
ShortWyeLength(NominalPipeSize) := pipefittings[index(NominalPipeSize, Pipesizes[:, 0]), 11]
# wye dimensions as of now are still being determined
# also there are only values for 2in and 6in nominal for now
BulkheadSocketDepth(ND) := outerradius(ND)*0.0149 m/(0.0650 m)
LongWyeLength(NominalPipeSize) := pipefittings[index(NominalPipeSize, Pipesizes[:, 0]), 12]
BulkheadDwg := ["C:\Users\May\Desktop\Final Designs\Drawings and Templates\bulkheadfitting.dwg"; 0.0650 m]
# mixed units work?!
BulkheadSocketOuterD(ND) := outerradius(ND)*0.0746 m/(0.0650 m)
DiagWyeLength(NominalPipeSize) := pipefittings[index(NominalPipeSize, Pipesizes[:, 0]), 13]
BulkheadThreadLength(ND) := outerradius(ND)*0.1432 m/(0.0650 m)
# Flexible Tubing Database
# Inner
# Diameter
# Outer Diameter
# Inner
# Diameter
# Outer Diameter
# These values are those given for Clear FEP tubing on the McMaster-Carr website.
# http://www.mcmaster.com/#standard-fep-tubing/=p805cm
FlexibleTubingMetric := [2, 4; 4, 6; 6, 8; 8, 10; 10, 12; 12, 14; 14, 16]*mm
FlexibleTubingEng := [
    1/16, 1/8;
    3/32, 5/32;
    1/8, 1/4;
    3/16, 1/4;
    1/4, 3/8;
    5/16, 3/8;
    3/8, 1/2;
    7/16, 1/2;
    1/2, 5/8;
    5/18, 3/4;
    3/4, 7/8;
    1, 9/8
]*in
# Fernco Rubber Fittings
# Uncut
# Length
# ND | ID | OD
FerncoCouplingDimensions := [
    1, 1.32, 1.72, 2.38;
    1.5, 1.94, 2.43, 3.43;
    2, 2.41, 2.9, 3.45;
    3, 3.46, 4.25, 3.98;
    4, 4.58, 5.22, 4.02;
    5, 5.52, 6.16, 3.97;
    6, 6.6, 7.32, 5.74;
    8, 8.64, 9.03, 6.04;
    10, 10.63, 11.77, 5.89;
    12, 12.52, 13.54, 6.32;
    15, 15.4, 16.49, 10
]*in
FerncoInnerDiameter(ND) := FerncoCouplingDimensions[index(ND, FerncoCouplingDimensions[:, 0]), 1]
FerncoOuterDiameter(ND) := FerncoCouplingDimensions[index(ND, FerncoCouplingDimensions[:, 0]), 2]
FerncoCouplingLength(ND) := FerncoCouplingDimensions[index(ND, FerncoCouplingDimensions[:, 0]), 3]
# Reducer Dimensions
# ND_in | ND_out | ReducerLength
# 10 to 4 inch AND 8 inch to 4 inch reducers added by mrf222 7/10/14
# http://63.156.201.113/003%20PVC%20White%20Schedule%2040%20Fittings,%20Unions,%20Saddles.pdf
ReducerDimensions := [
    .75 in, .5 in, 3/32*in;
    1 in, .5 in, 13/32*in;
    1 in, .75 in, 3/16*in;
    1.25 in, 1 in, 5/16*in;
    1.5 in, 1 in, 5/16*in;
    1.5 in, 1.25 in, 5/32*in;
    2 in, .5 in, 11/16*in;
    2 in, 1.5 in, 1/8*in;
    3 in, 2 in, 21/32*in;
    4 in, 2 in, 25/16*in;
    4 in, 3 in, 15/32*in;
    6 in, 4 in, 41/32*in;
    8 in, 4 in, 75/32*in;
    8 in, 6 in, 43/32*in;
    10 in, 4 in, 107/32*in
]
ReducerLength(ND_in, ND_out) :=
    L_Reducer ← 0 in
    done ← 0
    i ← 0
    while i < rows(ReducerDimensions) and done == 0
        if ND_in == ReducerDimensions[:, 0][i] and ND_out == ReducerDimensions[:, 1][i]
            L_Reducer ← ReducerDimensions[:, 2][i]
            done ← 1
        i ← i + 1 otherwise
    return L_Reducer
Pipesizescoupling := [
    .405 in, 1/8*in;
    .540 in, 1/4*in;
    .675 in, 3/8*in;
    .840 in, 1/2*in;
    1.050 in, 3/4*in;
    1.315 in, 1 in;
    1.66 in, 1.25 in;
    1.9 in, 1.5 in;
    2.375 in, 2 in;
    2.875 in, 2.5 in;
    3.5 in, 3 in;
    4 in, 3.5 in;
    4.5 in, 4 in;
    5.563 in, 5 in;
    6.625 in, 6 in;
    8.625 in, 8 in;
    10.75 in, 10 in;
    12.75 in, 12 in;
    14 in, 14 in;
    15 in, 15 in;
    16 in, 16 in;
    18 in, 18 in;
    20 in, 20 in;
    24 in, 24 in
]
Pipesizes := [
    1/8*in, .405 in;
    1/4*in, .540 in;
    3/8*in, .675 in;
    1/2*in, .840 in;
    3/4*in, 1.050 in;
    1 in, 1.315 in;
    1.25 in, 1.66 in;
    1.5 in, 1.9 in;
    2 in, 2.375 in;
    2.5 in, 2.875 in;
    3 in, 3.5 in;
    3.5 in, 4 in;
    4 in, 4.5 in;
    5 in, 5.563 in;
    6 in, 6.625 in;
    8 in, 8.625 in;
    10 in, 10.75 in;
    12 in, 12.75 in;
    14 in, 14 in;
    15 in, 15 in;
    16 in, 16 in;
    18 in, 18 in;
    20 in, 20 in;
    24 in, 24 in
]
