# Reference changed 7/1/2014
# Notes :
# 200 Lps looks nuts! Many problems. But high flow rate plants are still under-development.
# [reference: StackedRapidSandFiltermrf222.xmcd]
# [reference: LinearCdc.xmcd]
# [reference: ChemStorageTanks.xmcd]
H_FiEntranceWeirSlot = 0.15 m
# [reference: MtoATranslators.xmcd]
# [reference: MtoATranslatorsWrapped.xmcd]
# [reference: ChannelF.xmcd]
# [reference: PlumbingF.xmcd]
# [reference: TankF.xmcd]
# [reference: StairsF.xmcd]
# [reference: DrainChannelF.xmcd]
# [reference: FlocculatorAC.xmcd]
# [reference: SedTankRemoveBotSlab.xmcd]
# Reference changed 7/1/2014
# [reference: EntranceTankAC.xmcd]
# [reference: ChemStockTanksAC.xmcd]
# Stacked Rapid Sand Filter
# Concrete Box and Plant Drain Channel Origin Points
# The filters and everything associated with them need to be bumped down in the y direction to avoid running into the walkway if there is more than 1 filter.
# The Y position is set so that the northern wall of the filter inlet channel aligns with the northern wall of the sed tanks (we want the inlet pipes to fit along the length of the inlet channel)
# Y spacing is the spacing between SedOutletCoupling1.Origin(N)1
# Two filters additional space:
# This stuff stays! Still a thing
FiSlide :=
    |SedOutletCoupling1_Origin(1)[1] - SedOutletCoupling1_Origin(2)[1]| if N_Fi ≥ 2
    0 otherwise
|SedOutletCoupling1_Origin(1)[1] - SedOutletCoupling1_Origin(2)[1]| = 1.2168 m
Fi_origin :=
    if EN_DoubleTrain == 0
        [
            Plant_Origin[0] - W_FiInletChannel - 5*T_PlantWall - T_FiWall - L_FiEntrance - L_FiExit - W_MpWalkway - L_Sed - W_PlantDC;
            Plant_Origin[1] + N_SedTanks*(W_Sed + T_PlantWall) - T_PlantWall - W_Fi/2 - ConRadius(ND_FiBwTrunk) - S_Fitting - FiSlide;
            Z_FiBottom
        ]
    otherwise
        [
            Plant_Origin[0] - (L_Sed - W_SedInletChannel - T_SedWeir) + W_Fi/2 + ConRadius(ND_FiBwTrunk) + S_Fitting;
            Plant_Origin[1] - 5*T_PlantWall - W_PlantDC - 2*W_FiInletChannel - T_FiWall - L_FiEntrance - L_FiExit - W_MpWalkway - L_Fi;
            Z_FiBottom
        ]
FiEntranceBox_origin :=
    if EN_DoubleTrain == 0
        [
            Plant_Origin[0] - W_FiInletChannel - 2*T_PlantWall - L_Sed - W_PlantDC - T_ChannelWall;
            Fi_origin[1] + W_Fi/2 - W_FiEntrance + S_Fitting + ConRadius(ND_FiBwTrunk);
            Z_FiEntranceBottom
        ]
    otherwise
        [
            Fi_origin[0] - W_Fi/2 + W_FiEntrance - S_Fitting - ConRadius(ND_FiBwTrunk);
            Plant_Origin[1] - 3*T_PlantWall - 2*W_FiInletChannel - W_PlantDC - L_FiEntrance - T_ChannelWall;
            Z_FiEntranceBottom
        ]
FiExitBox_origin := FiEntranceBox_origin + {
    [-L_FiEntrance - T_ChannelWall; 0; 0] if EN_DoubleTrain == 0
    [0; -T_ChannelWall - L_FiExit; 0] otherwise
}
FiInletChannel_Origin :=
    if EN_DoubleTrain == 0
        [
            Plant_Origin[0] - L_Sed - 2*T_PlantWall - W_PlantDC;
            Fi_origin[1] + W_Fi/2 - W_FiEntrance + S_Fitting + ConRadius(ND_FiBwTrunk) - L_FiInletChannel + W_FiEntrance;
            Z_FiInletChannelBottom
        ]
    otherwise
        [
            Plant_Origin[0] + (L_FiInletChannel - (L_Sed - W_SedInletChannel - T_SedWeir));
            Plant_Origin[1] - W_PlantDC - 2*W_FiInletChannel - 3*T_PlantWall;
            Z_FiInletChannelBottom
        ]
FiOverflowBox_Origin :=
    if EN_DoubleTrain == 0
        [
            FiEntranceBox_origin[0];
            FiEntranceBox_origin[1] - T_ChannelWall - W_FiOverflow;
            Z_FiOverflowBottom
        ]
    otherwise
        [
            FiEntranceBox_origin[0] + T_ChannelWall + W_FiOverflow;
            FiEntranceBox_origin[1];
            Z_FiOverflowBottom
        ]
FiDistBox_Origin :=
    if EN_DoubleTrain == 0
        [
            FiOverflowBox_Origin[0] - L_FiOverflow - T_ChannelWall;
            FiOverflowBox_Origin[1];
            FiExitBox_origin[2]
        ]
    [FiOverflowBox_Origin[0]; FiOverflowBox_Origin[1] - L_FiExit - T_ChannelWall; FiExitBox_origin[2]] otherwise
# Drain Channels Below: | Will it have to be moved along with the rest of the SRSF?
PlantDC_Origin := [
    Plant_Origin[0] - L_Sed - T_PlantWall - W_PlantDC;
    Plant_Origin[1] - T_PlantWall;
    Z_PlantUpperDCBottom + H_PlantDC
]
PlantLowerDC_Origin :=
    if EN_DoubleTrain == 0
        [
            Plant_Origin[0] - L_Sed - T_PlantWall - W_PlantDC;
            Plant_Origin[1] - T_PlantWall;
            Z_PlantLowerDCBottom + H_PlantDC
        ]
    otherwise
        [
            Plant_Origin[0] - L_Sed - T_PlantWall - W_PlantDC;
            Plant_Origin[1] - 2*T_PlantWall - W_FiInletChannel - W_PlantDC - T_ChannelWall;
            Z_PlantLowerDCBottom + H_PlantDC
        ]
PlantUpperDC_Origin :=
    if EN_DoubleTrain == 0
        [
            Plant_Origin[0] - L_Sed - T_PlantWall - W_PlantDC;
            Fi_origin[1] + W_Fi;
            Z_PlantUpperDCBottom + H_PlantDC
        ]
    otherwise
        [
            Plant_Origin[0] - L_Sed - T_PlantWall - W_PlantDC;
            Plant_Origin[1] - T_PlantWall;
            Z_PlantUpperDCBottom + H_PlantDC
        ]
PlantSideDC_Origin := [
    Plant_Origin[0] - L_Sed - T_PlantWall;
    Plant_Origin[1] - 2*T_PlantWall - W_FiInletChannel;
    Z_PlantLowerDCBottom + H_PlantDC
]
# Coupling Origin Points
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# This will be the pipe layout in the entrance and exit boxes to allow for 2 90 degree elbows in  Pipes 2 and 3 coming from the entrance box (on the right)
FiInletCoupling1_origin :=
    if EN_DoubleTrain == 0
        [
            FiEntranceBox_origin[0] - L_FiEntrance + T_ConcreteMin + ConRadius(ND_FiTrunk);
            FiEntranceBox_origin[1] + W_FiEntrance - ConRadius(ND_FiBwTrunk) - S_Fitting;
            FiEntranceBox_origin[2] - CouplingLength(ND_FiTrunk) + SocketDepth(ND_FiTrunk)
        ]
    otherwise
        [
            FiEntranceBox_origin[0] - W_FiEntrance + ConRadius(ND_FiBwTrunk) + S_Fitting;
            FiEntranceBox_origin[1] + T_ConcreteMin + ConRadius(ND_FiTrunk);
            FiEntranceBox_origin[2] - CouplingLength(ND_FiTrunk) + SocketDepth(ND_FiTrunk)
        ]
FiBwInletCoupling_origin :=
    if EN_DoubleTrain == 0
        [
            FiInletCoupling1_origin[0] + L_FiOverflowWeir - S_Fitting - 2*ConRadius(ND_FiBwTrunk);
            FiInletCoupling1_origin[1];
            FiEntranceBox_origin[2] - CouplingLength(ND_FiBwTrunk) + SocketDepth(ND_FiBwTrunk)
        ]
    otherwise
        [
            FiInletCoupling1_origin[0];
            FiInletCoupling1_origin[1] + L_FiOverflowWeir - S_Fitting - 2*ConRadius(ND_FiBwTrunk);
            FiEntranceBox_origin[2] - CouplingLength(ND_FiBwTrunk) + SocketDepth(ND_FiBwTrunk)
        ]
FiInletCoupling2_origin :=
    if EN_DoubleTrain == 0
        [
            FiEntranceBox_origin[0] - L_FiEntrance + L_FiOverflowWeir - (ConRadius(ND_FiTrunk) + S_Fitting);
            FiEntranceBox_origin[1] + 2*T_ConcreteMin + 3*ConRadius(ND_FiTrunk);
            FiInletCoupling1_origin[2]
        ]
    otherwise
        [
            FiEntranceBox_origin[0] - 2*T_ConcreteMin - 3*ConRadius(ND_FiTrunk);
            FiEntranceBox_origin[1] + L_FiOverflowWeir - (ConRadius(ND_FiTrunk) + S_Fitting);
            FiInletCoupling1_origin[2]
        ]
FiInletCoupling3_origin :=
    if EN_DoubleTrain == 0
        [
            FiEntranceBox_origin[0] - L_FiEntrance + T_ConcreteMin + ConRadius(ND_FiTrunk);
            FiEntranceBox_origin[1] + 2*T_ConcreteMin + 3*ConRadius(ND_FiTrunk);
            FiEntranceBox_origin[2] - CouplingLength(ND_FiTrunk) + SocketDepth(ND_FiTrunk)
        ]
    otherwise
        [
            FiEntranceBox_origin[0] - 2*T_ConcreteMin - 3*ConRadius(ND_FiTrunk);
            FiEntranceBox_origin[1] + T_ConcreteMin + ConRadius(ND_FiTrunk);
            FiEntranceBox_origin[2] - CouplingLength(ND_FiTrunk) + SocketDepth(ND_FiTrunk)
        ]
FiExitCoupling0_origin :=
    if EN_DoubleTrain == 0
        [
            FiExitBox_origin[0] - T_ConcreteMin - ConRadius(ND_FiTrunk);
            FiInletCoupling1_origin[1];
            FiExitBox_origin[2] - CouplingLength(ND_FiTrunk) + SocketDepth(ND_FiTrunk)
        ]
    otherwise
        [
            FiInletCoupling1_origin[0];
            FiExitBox_origin[1] + L_FiExit - T_ConcreteMin - ConRadius(ND_FiTrunk);
            FiExitBox_origin[2] - CouplingLength(ND_FiTrunk) + SocketDepth(ND_FiTrunk)
        ]
FiExitCoupling1_origin :=
    if EN_DoubleTrain == 0
        [
            (FiExitBox_origin[0] - L_FiExit + T_ConcreteMin) + ConRadius(ND_FiTrunk);
            FiInletCoupling1_origin[1];
            FiExitBox_origin[2] - CouplingLength(ND_FiTrunk) + SocketDepth(ND_FiTrunk)
        ]
    otherwise
        [
            FiInletCoupling1_origin[0];
            FiExitBox_origin[1] + T_ConcreteMin + ConRadius(ND_FiTrunk);
            FiExitBox_origin[2] - CouplingLength(ND_FiTrunk) + SocketDepth(ND_FiTrunk)
        ]
FiExitCoupling2_origin :=
    if EN_DoubleTrain == 0
        [
            (FiExitBox_origin[0] - L_FiExit + T_ConcreteMin) + ConRadius(ND_FiExitWaste);
            FiExitBox_origin[1] + T_ConcreteMin + ConRadius(ND_FiTrunk);
            FiExitBox_origin[2] - CouplingLength(ND_FiTrunk) + SocketDepth(ND_FiTrunk)
        ]
    otherwise
        [
            FiExitBox_origin[0] - T_ConcreteMin - ConRadius(ND_FiTrunk);
            FiExitBox_origin[1] + T_ConcreteMin + ConRadius(ND_FiExitWaste);
            FiExitBox_origin[2] - CouplingLength(ND_FiTrunk) + SocketDepth(ND_FiTrunk)
        ]
FiExitCoupling3_origin :=
    if EN_DoubleTrain == 0
        [
            FiExitBox_origin[0] - T_ConcreteMin - ConRadius(ND_FiTrunk);
            FiExitBox_origin[1] + T_ConcreteMin + ConRadius(ND_FiTrunk);
            FiExitBox_origin[2] - CouplingLength(ND_FiExitWaste) + SocketDepth(ND_FiExitWaste)
        ]
    otherwise
        [
            FiExitBox_origin[0] - T_ConcreteMin - ConRadius(ND_FiTrunk);
            FiExitBox_origin[1] + L_FiExit - T_ConcreteMin - ConRadius(ND_FiTrunk);
            FiExitBox_origin[2] - CouplingLength(ND_FiExitWaste) + SocketDepth(ND_FiExitWaste)
        ]
FiFerncoBwCoupling_origin :=
    [Fi_origin[0]; FiBwInletCoupling_origin[1]; Fi_origin[2] + outerradius(ND_FiBwManBranch)] if EN_DoubleTrain == 0
    [FiBwInletCoupling_origin[0]; Fi_origin[1] + L_Fi; Fi_origin[2] + outerradius(ND_FiBwManBranch)] otherwise
FiFerncoCouplings_origin :=
    [Fi_origin[0]; FiFerncoBwCoupling_origin[1]; FiFerncoBwCoupling_origin[2] + H_FiBottomLayer] if EN_DoubleTrain == 0
    [FiFerncoBwCoupling_origin[0]; Fi_origin[1] + L_Fi; FiFerncoBwCoupling_origin[2] + H_FiBottomLayer] otherwise
FiWallBwCoupling_origin :=
    if EN_DoubleTrain == 0
        [
            Fi_origin[0] + T_FiWall + CouplingLength(ND_FiBwTrunk) - SocketDepth(ND_FiBwTrunk);
            FiBwInletCoupling_origin[1];
            Fi_origin[2] + outerradius(ND_FiBwManBranch)
        ]
    otherwise
        [
            FiBwInletCoupling_origin[0];
            Fi_origin[1] + T_FiWall + SocketDepth(ND_FiBwTrunk) + L_Fi;
            Fi_origin[2] + outerradius(ND_FiBwManBranch)
        ]
FiWallCouplings_origin :=
    if EN_DoubleTrain == 0
        [
            Fi_origin[0] + T_FiWall + CouplingLength(ND_FiTrunk) - SocketDepth(ND_FiTrunk);
            FiBwInletCoupling_origin[1];
            Fi_origin[2] + outerradius(ND_FiBwManBranch) + H_FiBottomLayer
        ]
    otherwise
        [
            FiBwInletCoupling_origin[0];
            Fi_origin[1] + T_FiWall + SocketDepth(ND_FiTrunk) + L_Fi;
            Fi_origin[2] + outerradius(ND_FiBwManBranch) + H_FiBottomLayer
        ]
# Concrete Box Dimensions
FiInletChannel_dim :=
    [W_FiInletChannel; L_FiInletChannel; H_FiInletChannel] if EN_DoubleTrain == 0
    [L_FiInletChannel; W_FiInletChannel; H_FiInletChannel] otherwise
FiEntranceBox_dim :=
    [L_FiEntrance; W_FiEntrance; H_FiEntrance] if EN_DoubleTrain == 0
    [W_FiEntrance; L_FiEntrance; H_FiEntrance] otherwise
FiExitBox_dim :=
    [L_FiExit; W_FiEntrance; H_FiEntrance] if EN_DoubleTrain == 0
    [W_FiEntrance; L_FiExit; H_FiEntrance] otherwise
Fi_dim :=
    [L_Fi; W_Fi; H_Fi] if EN_DoubleTrain == 0
    [W_Fi; L_Fi; H_Fi] otherwise
    = [1.58239; 1.70931; 4.77206] m
FiOverflowBox_Dim :=
    [L_FiOverflow; W_FiOverflow; H_FiOverflow] if EN_DoubleTrain == 0
    [W_FiOverflow; L_FiOverflow; H_FiOverflow] otherwise
FiDistBox_Dim :=
    [L_FiExit; W_FiOverflow; H_FiEntrance] if EN_DoubleTrain == 0
    [W_FiOverflow; L_FiExit; H_FiEntrance] otherwise
# Inlet Channel
# Origins and Dimensions
FiInletCoupling_Origin(N) :=
    if EN_DoubleTrain == 0
        [
            FiInletChannel_Origin[0] + CouplingLength(ND_FiEntrancePipe) - SocketDepth(ND_FiEntrancePipe);
            SedOutletCoupling2_Origin(N)[1] - FiSlide;
            SedOutletCoupling2_Origin(N)[2]
        ]
    (SedOutletCoupling2_Origin(N) - [0 m; W_PlantDC + T_PlantWall; 0 m]) otherwise
SocketDepth(ND_FiEntrancePipe) = 0.064 m
# Here is the Length calculation for the Filter Inlet Pipe from the sed tank
CouplingLength(ND_FiEntrancePipe) = 0.20955 m
# This logic is in case an elbow is used instead of the coupling for the entrance to the front box or inlet channel.
# minus IncludeElbow
L_FiInletPipe :=
    if N_Fi ≥ 2
        SedOutletCoupling2_Origin(1)[0] - CouplingLength(ND_FiEntrancePipe) + 2*SocketDepth(ND_FiEntrancePipe) - FiInletCoupling_Origin(1)[0] if EN_DoubleTrain == 0
        (W_PlantDC + SocketDepth(ND_FiEntrancePipe) + T_PlantWall - CouplingLength(ND_FiEntrancePipe) - SocketDepth(ND_FiEntrancePipe)) otherwise
    otherwise
        SedOutletCoupling2_Origin(1)[0] - CouplingLength(ND_FiEntrancePipe) + 2*SocketDepth(ND_FiEntrancePipe) - FiInletCoupling_Origin(1)[0] if EN_DoubleTrain == 0
        (W_PlantDC + SocketDepth(ND_FiEntrancePipe) + T_PlantWall - (CouplingLength(ND_FiEntrancePipe) - SocketDepth(ND_FiEntrancePipe))) otherwise
IncludeElbow = 0.473069 m
# Inlet Channel Concrete
L_FiInletChannel = 3.16146 m
W_FiInletChannel = 0.336537 m
H_FiInletChannel = 0.374555 m
LayerFiInletChannel := layer_new("FiInletChannelCon", grey)
FiInletChannel := Tank(FiInletChannel_Origin, FiInletChannel_dim, T_PlantWall)
FreezeFiInletChannel := FreezeLayer("FiInletChannelCon")
FiInletChannelConScript := stack(LayerFiInletChannel, FiInletChannel, FreezeFiInletChannel)
# Inlet Channel Coupling(s)
FiInletFittingLayer := layer_new("FiInletFittingsPlu", green)
FiInletFittingFrz := FreezeLayer("FiInletFittingsPlu")
FiInletCouplingScript :=
    Local ← FiInletFittingLayer
    for i ∈ 1 .. N_FiEntrancePipes
        Local ← stack(Local, CouplingSUBF(FiInletCoupling_Origin(i), [0; 0]*deg, ND_FiEntrancePipe, PS_Default, ["FiInletChannelCon"]))
    return stack(Local, FiInletFittingFrz)
# None of these angles are ready for double train plants!
# Inlet Pipes from Sedimentation
FiInletPipeLayer := layer_new("FiInletPipePlu", blue)
FiInletPipeFrz := FreezeLayer("FiInletPipePlu")
FiInletPipe :=
    Local ← FiInletPipeLayer
    for i ∈ 1 .. N_FiEntrancePipes
        Local ← stack(Local, PipeSUBF([
            SedOutletCoupling2_Origin(i)[0] - CouplingLength(ND_FiEntrancePipe) + 2*SocketDepth(ND_FiEntrancePipe);
            SedOutletCoupling2_Origin(i)[1] - FiSlide;
            SedOutletCoupling2_Origin(i)[2]
        ], L_FiInletPipe, [0; 0]*deg, ND_FiEntrancePipe, PS_Default, ["FiInletChannelCon"]))
    return Local
FiInletPipeHigh :=
    Local ← FiInletPipeLayer
    for i ∈ 1 .. N_FiEntrancePipes
        Local ← stack(Local, PipeSUBF(FiInletCoupling_Origin(i), L_FiInletPipe, [-90; 0]*deg, ND_FiEntrancePipe, PS_Default, ["FiInletChannelCon"]))
    return stack(Local, FiInletPipeFrz)
FiInletPipe :=
    FiInletPipe if EN_DoubleTrain == 0
    FiInletPipeHigh otherwise
FiInletPipeScript := stack(FiInletPipeLayer, FiInletPipe, FiInletPipeFrz)
ElbowLayer := layer_new("FiInletElbow", green)
DrawElbow :=
    Local ← FiInletPipeLayer
    if N_Fi < 2
        Local ← stack(Local, ElbowSUBF([
            SedOutletCoupling2_Origin(1)[0] - CouplingLength(ND_FiEntrancePipe) + 2*SocketDepth(ND_FiEntrancePipe) - L_FiInletPipe;
            SedOutletCoupling2_Origin(1)[1];
            SedOutletCoupling2_Origin(1)[2]
        ], [90; 0; -90]*deg, ND_FiEntrancePipe, PS_Default, ["FiInletChannelCon"]))
    otherwise
        for i ∈ 1 .. N_FiEntrancePipes
            Local ← stack(Local, ElbowSUBF([
                SedOutletCoupling2_Origin(i)[0] - CouplingLength(ND_FiEntrancePipe) + 2*SocketDepth(ND_FiEntrancePipe) - L_FiInletPipe;
                SedOutletCoupling2_Origin(i)[1] - FiSlide;
                SedOutletCoupling2_Origin(i)[2]
            ], [90; 0; -90]*deg, ND_FiEntrancePipe, PS_Default, ["FWeirControlCon"]))
    return Local
ElbowFrz := FreezeLayer("FiInletElbow")
FiInletElbowScript := stack(ElbowLayer, DrawElbow, ElbowFrz)
# Draw the following pipe and coupling only if the inlet or entrance tank is at the same elevation as the walkway!
AtWalkway :=
    1 if Z_FiInletChannelBottom == Z_Walkway
    0 otherwise
Space := Z_FiInletChannelBottom - SedOutletCoupling2_Origin(1)[2] - ElbowRadius(ND_FiEntrancePipe) - SocketDepth(ND_FiEntrancePipe)
Space = 0.10955 m  # The code below assumes that the coupling length is always equal to or shorter than "space"
CouplingLength(ND_FiEntrancePipe) = 0.20955 m
MakeFiEntranceVertCouplingLayer := layer_new("FiEntranceVertCouplingLayer", green)
DrawFiEntranceVertCoupling :=
    Local ← MakeFiEntranceVertCouplingLayer
    if N_Fi < 2
        Local ← stack(Local, CouplingSUBF([
            SedOutletCoupling2_Origin(1)[0] - CouplingLength(ND_FiEntrancePipe) + 2*SocketDepth(ND_FiEntrancePipe) - L_FiInletPipe - ElbowRadius(ND_FiEntrancePipe);
            SedOutletCoupling2_Origin(1)[1];
            Z_FiInletChannelBottom - SocketDepth(ND_FiEntrancePipe)
        ], [0; -90; 0]*deg, ND_FiEntrancePipe, PS_Default, ["FiInletChannelCon"]))
    otherwise
        for i ∈ 1 .. N_FiEntrancePipes
            Local ← stack(Local, CouplingSUBF([
                SedOutletCoupling2_Origin(i)[0] - CouplingLength(ND_FiEntrancePipe) + 2*SocketDepth(ND_FiEntrancePipe) - L_FiInletPipe - ElbowRadius(ND_FiEntrancePipe);
                SedOutletCoupling2_Origin(i)[1] - FiSlide;
                Z_FiInletChannelBottom - SocketDepth(ND_FiEntrancePipe)
            ], [0; -90; 0]*deg, ND_FiEntrancePipe, PS_Default, ["FWeirControlCon"]))
    return Local
FreezeFiEntranceVertCoupling := FreezeLayer("FiEntranceVertCouplingLayer")
MakeFiEntranceVertPipeLayer := layer_new("FiEntranceVertPipeLayer", blue)
L_FiEntranceVertPipe :=
    (Space - CouplingLength(ND_FiEntrancePipe) + 2*SocketDepth(ND_FiEntrancePipe)) if Space ≥ CouplingLength(ND_FiEntrancePipe)
    Z_FiInletChannelBottom - SedOutletCoupling2_Origin(1)[2] - ElbowRadius(ND_FiEntrancePipe) otherwise
DrawFiEntranceVertPipe :=
    Local ← MakeFiEntranceVertPipeLayer
    if N_Fi < 2
        Local ← stack(Local, PipeSUBF([
            SedOutletCoupling2_Origin(1)[0] - CouplingLength(ND_FiEntrancePipe) + 2*SocketDepth(ND_FiEntrancePipe) - L_FiInletPipe - ElbowRadius(ND_FiEntrancePipe);
            SedOutletCoupling2_Origin(1)[1];
            SedOutletCoupling2_Origin(1)[2] + ElbowRadius(ND_FiEntrancePipe)
        ], L_FiEntranceVertPipe, [0; 90; 0]*deg, ND_FiEntrancePipe, PS_Default, ["FiInletChannelCon"]))
    otherwise
        for i ∈ 1 .. N_FiEntrancePipes
            Local ← stack(Local, PipeSUBF([
                SedOutletCoupling2_Origin(i)[0] - CouplingLength(ND_FiEntrancePipe) + 2*SocketDepth(ND_FiEntrancePipe) - L_FiInletPipe - ElbowRadius(ND_FiEntrancePipe);
                SedOutletCoupling2_Origin(i)[1] - FiSlide;
                SedOutletCoupling2_Origin(i)[2] + ElbowRadius(ND_FiEntrancePipe)
            ], L_FiEntranceVertPipe, [0; 90; 0]*deg, ND_FiEntrancePipe, PS_Default, ["FWeirControlCon"]))
    return Local
FreezeFiEntranceVertPipe := FreezeLayer("FiEntranceVertPipeLayer")
FiEntranceVertPlumbingScript := stack(DrawFiEntranceVertCoupling, FreezeFiEntranceVertCoupling, DrawFiEntranceVertPipe, FreezeFiEntranceVertPipe)
FiInletChannelScriptElbow :=
    stack(FiInletChannelConScript, FiInletPipeScript, FiInletElbowScript, FiEntranceVertPlumbingScript) if AtWalkway == 1
    stack(FiInletChannelConScript, FiInletPipeScript, FiInletElbowScript, DrawFiEntranceVertPipe, FreezeFiEntranceVertPipe) otherwise
# Coupling or elbow. Not both!
# Changed to elbow 7/16/2014
FiInletChannelScript := FiInletChannelScriptElbow
FiInletChannelScriptMod := stack(FiInletChannelConScript)
# Filter Box Concrete
LayerFiTank := layer_new("FiTankCon", grey)
FiTank := Tank(Fi_origin, Fi_dim, T_FiWall)
FiSiphonManLedgeL :=
    if EN_DoubleTrain == 0
        BoxF([
            Fi_origin[0];
            Fi_origin[1] + T_ConcreteMin + ConRadius(ND_FiSiphon) - 2*S_Fitting;
            Z_FiSiphonInlet - ConRadius(ND_FiSiphon) - outerradius(ND_FiSiphon)
        ], [
            Fi_origin[0] - T_ConcreteMin;
            Fi_origin[1] + T_ConcreteMin + ConRadius(ND_FiSiphon) + 2*S_Fitting;
            Z_FiSiphonInlet - ConRadius(ND_FiSiphon) - outerradius(ND_FiSiphon) - T_ConcreteMin
        ], [0; 0; 0]*deg)
    otherwise
        BoxF([
            Fi_origin[0] - T_ConcreteMin - ConRadius(ND_FiSiphon) + 2*S_Fitting;
            Fi_origin[1];
            Z_FiSiphonInlet - ConRadius(ND_FiSiphon) - outerradius(ND_FiSiphon)
        ], [
            Fi_origin[0] - T_ConcreteMin - ConRadius(ND_FiSiphon) - 2*S_Fitting;
            Fi_origin[1] + T_ConcreteMin;
            Z_FiSiphonInlet - ConRadius(ND_FiSiphon) - outerradius(ND_FiSiphon) - T_ConcreteMin
        ], [0; 0; 0]*deg)
FiSiphonManLedgeR :=
    if EN_DoubleTrain == 0
        BoxF([
            Fi_origin[0] - L_Fi;
            Fi_origin[1] + T_ConcreteMin + ConRadius(ND_FiSiphon) - 2*S_Fitting;
            Z_FiSiphonInlet - ConRadius(ND_FiSiphon) - outerradius(ND_FiSiphon)
        ], [
            Fi_origin[0] - L_Fi + T_ConcreteMin;
            Fi_origin[1] + T_ConcreteMin + ConRadius(ND_FiSiphon) + 2*S_Fitting;
            Z_FiSiphonInlet - ConRadius(ND_FiSiphon) - outerradius(ND_FiSiphon) - T_ConcreteMin
        ], [0; 0; 0]*deg)
    otherwise
        BoxF([
            Fi_origin[0] - T_ConcreteMin - ConRadius(ND_FiSiphon) + 2*S_Fitting;
            Fi_origin[1] + L_Fi;
            Z_FiSiphonInlet - ConRadius(ND_FiSiphon) - outerradius(ND_FiSiphon)
        ], [
            Fi_origin[0] - T_ConcreteMin - ConRadius(ND_FiSiphon) - 2*S_Fitting;
            Fi_origin[1] + L_Fi - T_ConcreteMin;
            Z_FiSiphonInlet - ConRadius(ND_FiSiphon) - outerradius(ND_FiSiphon) - T_ConcreteMin
        ], [0; 0; 0]*deg)
LayerFiTankFreeze := FreezeLayer("FiTankCon")
FiTankScript := stack(LayerFiTank, FiTank, FiSiphonManLedgeL, FiSiphonManLedgeR, Union_All, LayerFiTankFreeze)
# Plant Drain Channel
MainDCLayer := layer_new("DrainChannelCon", grey)
SideDCLayer := layer_new("DrainChannelSideCon", grey)
L_PlantLowerDC :=
    (Fi_origin[1] + W_Fi - Plant_Origin[1] - T_ChannelWall + T_PlantWall) if EN_DoubleTrain == 0
    (T_PlantWall + W_FiInletChannel + W_PlantDC + T_ChannelWall) otherwise
    = 6.58864 m
L_PlantUpperDC :=
    (Et_Origin[1] + W_Et - Fi_origin[1] - W_Fi - T_ChannelWall + T_PlantWall) if EN_DoubleTrain == 0
    (Et_Origin[1] + L_EtHopperFront/2 - (Plant_Origin[1] - T_PlantWall) + W_EtDC) otherwise
    = 4.65273 m
L_PlantSideDC := L_FiInletChannel + W_SedInletChannel + 2*T_PlantWall - T_ChannelWall + T_SedWeir
MainDCLower := DrainChannelF(PlantLowerDC_Origin, [270; 0; 0]*deg, Q_PlantDCMax, W_PlantDC, H_PlantDC, L_PlantLowerDC, Slope_PlantDC, Nu_Water, E_Concrete, 1)
MainDCUpper := DrainChannelF(PlantUpperDC_Origin, [270; 0; 0]*deg, Q_PlantDCMax, W_PlantDC, H_PlantDC, L_PlantUpperDC, Slope_PlantDC, Nu_Water, E_Concrete, 1)
SideLowerDC := DrainChannelF(PlantSideDC_Origin, [180; 0; 0]*deg, Q_PlantDCMax, W_PlantDC, H_PlantDC + (L_PlantLowerDC - L_PlantSideDC)*.02, L_PlantSideDC, .02, Nu_Water, E_Concrete, 1)
MainDC := DrainChannelF(PlantDC_Origin, [270; 0; 0]*deg, Q_PlantDCMax, W_PlantDC, H_PlantDC, L_PlantDC, Slope_PlantDC, Nu_Water, E_Concrete, 1)
MainDCScript :=
    stack(MainDCLayer, MainDC) if Z_PlantLowerDCBottom > Z_PlantUpperDCBottom - Slope_PlantDC*L_PlantUpperDC - 10 cm
    stack(MainDCLayer, MainDCLower, MainDCUpper) otherwise
SideDCScript := stack(SideDCLayer, SideLowerDC)
DCWestWallLower :=
    if EN_DoubleTrain == 0
        BoxF([
            Plant_Origin[0] - L_Sed - T_PlantWall - W_PlantDC;
            Plant_Origin[1] - T_PlantWall;
            PlantLowerDC_Origin[2]
        ], [
            Plant_Origin[0] - L_Sed - W_PlantDC - T_PlantWall - T_ChannelWall;
            PlantLowerDC_Origin[1] + L_PlantLowerDC + T_ChannelWall;
            Z_Walkway - T_Floor
        ], [0; 0; 0]*deg)
    otherwise
        BoxF([
            Plant_Origin[0] - L_Sed - T_PlantWall - W_PlantDC;
            Plant_Origin[1] - 2*T_PlantWall - W_FiInletChannel;
            PlantLowerDC_Origin[2]
        ], [
            Plant_Origin[0] - L_Sed - W_PlantDC - T_PlantWall - T_ChannelWall;
            PlantLowerDC_Origin[1] + L_PlantLowerDC + T_ChannelWall;
            Z_Walkway - T_Floor
        ], [0; 0; 0]*deg)
DCWestWallUpper :=
    if EN_DoubleTrain == 0
        BoxF([Plant_Origin[0] - L_Sed - T_PlantWall - W_PlantDC; PlantUpperDC_Origin[1]; PlantUpperDC_Origin[2]], [
            Plant_Origin[0] - L_Sed - W_PlantDC - T_PlantWall - T_ChannelWall;
            Plant_Origin[1] - T_PlantWall + L_PlantDC + T_ChannelWall;
            Z_Walkway - T_Floor
        ], [0; 0; 0]*deg)
    otherwise
        BoxF([Plant_Origin[0] - L_Sed - T_PlantWall - W_PlantDC; PlantUpperDC_Origin[1]; PlantUpperDC_Origin[2]], [
            Plant_Origin[0] - L_Sed - W_PlantDC - T_PlantWall - T_ChannelWall;
            PlantUpperDC_Origin[1] + L_PlantUpperDC;
            Z_Walkway - T_Floor
        ], [0; 0; 0]*deg)
DCEastWallLower :=
    if EN_DoubleTrain == 0
        BoxF([Plant_Origin[0] - L_Sed - T_PlantWall; Plant_Origin[1] - T_PlantWall; PlantLowerDC_Origin[2]], [
            Plant_Origin[0] - L_Sed + T_ChannelWall - T_PlantWall;
            PlantLowerDC_Origin[1] + L_PlantLowerDC + T_ChannelWall;
            Z_Walkway - T_Floor
        ], [0; 0; 0]*deg)
    otherwise
        BoxF([
            Plant_Origin[0] - L_Sed - T_PlantWall;
            Plant_Origin[1] - 2*T_PlantWall - W_FiInletChannel;
            PlantLowerDC_Origin[2]
        ], [
            Plant_Origin[0] - L_Sed + T_ChannelWall - T_PlantWall;
            PlantLowerDC_Origin[1] + L_PlantLowerDC + T_ChannelWall;
            Z_Walkway - T_Floor
        ], [0; 0; 0]*deg)
DCEastWallUpper :=
    if EN_DoubleTrain == 0
        BoxF([Plant_Origin[0] - L_Sed - T_PlantWall; PlantUpperDC_Origin[1]; PlantUpperDC_Origin[2]], [
            Plant_Origin[0] - L_Sed + T_ChannelWall - T_PlantWall;
            Plant_Origin[1] - T_PlantWall + L_PlantDC + T_ChannelWall;
            Z_Walkway - T_Floor
        ], [0; 0; 0]*deg)
    otherwise
        BoxF([Plant_Origin[0] - L_Sed - T_PlantWall; PlantUpperDC_Origin[1]; PlantUpperDC_Origin[2]], [
            Plant_Origin[0] - L_Sed + T_ChannelWall - T_PlantWall;
            PlantUpperDC_Origin[1] + L_PlantUpperDC;
            Z_Walkway - T_Floor
        ], [0; 0; 0]*deg)
DCNorthWall :=
    if EN_DoubleTrain == 0
        BoxF([Plant_Origin[0] - L_Sed; Plant_Origin[1] - T_ChannelWall + L_PlantDC; PlantUpperDC_Origin[2]], [
            Plant_Origin[0] - L_Sed - T_ChannelWall - W_PlantDC - T_PlantWall;
            Plant_Origin[1] + L_PlantDC;
            Z_Walkway - T_Floor
        ], [0; 0; 0]*deg)
    otherwise
        BoxF([
            Plant_Origin[0] - L_Sed - T_PlantWall + T_ChannelWall;
            (PlantUpperDC_Origin[1] + L_PlantUpperDC) + T_ChannelWall;
            PlantUpperDC_Origin[2]
        ], [
            Plant_Origin[0] - L_Sed - T_ChannelWall - W_PlantDC - T_PlantWall;
            PlantUpperDC_Origin[1] + L_PlantUpperDC;
            Z_Walkway - T_Floor
        ], [0; 0; 0]*deg)
DCSideNorthWall := BoxF([
    Plant_Origin[0] - L_Sed - T_PlantWall;
    Plant_Origin[1] - 2*T_PlantWall - W_FiInletChannel + T_ChannelWall;
    Z_PlantLowerDCBottom + H_PlantDC
], [
    Plant_Origin[0] - L_Sed - T_PlantWall + L_PlantSideDC + T_ChannelWall;
    Plant_Origin[1] - 2*T_PlantWall - W_FiInletChannel;
    Z_Walkway - T_Floor
], [0; 0; 0]*deg)
DCSideSouthWall := BoxF([
    Plant_Origin[0] - L_Sed - T_PlantWall;
    Plant_Origin[1] - 2*T_PlantWall - W_FiInletChannel - W_PlantDC;
    Z_PlantLowerDCBottom + H_PlantDC
], [
    Plant_Origin[0] - L_Sed - T_PlantWall + L_PlantSideDC + T_ChannelWall;
    Plant_Origin[1] - 2*T_PlantWall - W_FiInletChannel - T_ChannelWall - W_PlantDC;
    Z_Walkway - T_Floor
], [0; 0; 0]*deg)
DCSideOuterWall := BoxF([
    Plant_Origin[0] - L_Sed - T_PlantWall + L_PlantSideDC + T_ChannelWall;
    Plant_Origin[1] - 2*T_PlantWall - W_FiInletChannel;
    Z_PlantLowerDCBottom + H_PlantDC
], [
    Plant_Origin[0] - L_Sed - T_PlantWall + L_PlantSideDC;
    Plant_Origin[1] - 2*T_PlantWall - W_FiInletChannel - T_ChannelWall - W_PlantDC;
    Z_Walkway - T_Floor
], [0; 0; 0]*deg)
DCDropoffWall := BoxF([
    Plant_Origin[0] - L_Sed - T_PlantWall + T_ChannelWall;
    PlantLowerDC_Origin[1] + L_PlantLowerDC;
    PlantLowerDC_Origin[2]
], [
    Plant_Origin[0] - L_Sed - T_PlantWall - W_PlantDC - T_ChannelWall;
    PlantLowerDC_Origin[1] + L_PlantLowerDC + T_ChannelWall;
    PlantUpperDC_Origin[2] - H_PlantDC - Slope_PlantDC*L_PlantUpperDC
], [0; 0; 0]*deg)
DrainChannelRMRecessWalls := BoxF([
    Plant_Origin[0] - L_Sed - T_PlantWall;
    Et_Origin[1] + W_Et + T_PlantWall;
    PlantUpperDC_Origin[2] - T_ChannelWall - H_PlantDC
], [
    FlocCoupling_Origin[0] + ConRadius(ND_RMPipe) + S_Fitting + T_ChannelWall;
    Floc_Origin[1] + N_FlocChannels*(W_FlocChannel + T_FlocChannelWall) - T_FlocChannelWall + T_PlantWall - T_ChannelWall;
    Z_Walkway - T_Floor
], [0; 0; 0]*deg)
FrzDrainChannel := FreezeLayer("DrainChannelCon")
FrzSideDrainChannel := FreezeLayer("DrainChannelSideCon")
FiInletChannelDCCutout := BoxF([
    Plant_Origin[0] - L_Sed - T_PlantWall - W_PlantDC;
    FiInletChannel_Origin[1] - T_PlantWall;
    FiInletChannel_Origin[2] - T_PlantWall
], [
    Plant_Origin[0] - L_Sed - W_PlantDC - 2*T_PlantWall;
    FiInletChannel_Origin[1] + T_PlantWall + L_FiInletChannel;
    Z_Walkway - T_Floor
], [0; 0; 0]*deg)
SedDCCutout := BoxF([Plant_Origin[0] - L_Sed; Plant_Origin[1] - T_PlantWall; Plant_Origin[2] - T_PlantWall], [
    Plant_Origin[0] - L_Sed - T_PlantWall;
    Plant_Origin[1] + W_Sed*N_SedTanks + T_SedWallDivider*N_SedTanks - T_SedWallDivider + T_PlantWall;
    Z_Walkway - T_Floor
], [0; 0; 0]*deg)
MirrorSedDCCutout := Mirror3dLast("yz", [Floc_Origin[0] - L_Floc - W_PlantDC/2 - T_PlantWall; 0 m], "n")
DrainChannelRMRecessCutout1 := BoxF([
    Plant_Origin[0] - L_Sed - T_PlantWall;
    Et_Origin[1] + W_Et + T_PlantWall - T_ChannelWall;
    PlantUpperDC_Origin[2] - H_PlantDC
], [
    FlocCoupling_Origin[0] + ConRadius(ND_RMPipe) + S_Fitting;
    Floc_Origin[1] + N_FlocChannels*(W_FlocChannel + T_FlocChannelWall) - T_FlocChannelWall + T_PlantWall;
    Z_Walkway - T_Floor + zc
], [0; 0; 0]*deg)
EtDrainChannelCutout := BoxF([
    FlocCoupling_Origin[0] + ConRadius(ND_RMPipe) + S_Fitting;
    EtDC_Origin[1] + W_EtDC;
    Et_Origin[2] - T_PlantWall
], [
    FlocCoupling_Origin[0] + ConRadius(ND_RMPipe) + S_Fitting + T_ChannelWall;
    EtDC_Origin[1];
    EtDC_Origin[2] - H_EtDC - Slope_EtDC*L_EtDC
], [0; 0; 0]*deg)
DrainChannelBoxCutout := BoxF([
    Plant_Origin[0] - L_Sed - T_PlantWall - W_PlantDC;
    PlantUpperDC_Origin[1];
    Z_PlantUpperDCBottom - Slope_PlantDC*L_PlantUpperDC
], [Plant_Origin[0] - L_Sed - T_PlantWall; PlantUpperDC_Origin[1] - T_PlantWall; Plant_Origin[2]], [0; 0; 0]*deg)
DrainChannelWedgeCutout := WedgeF([
    Plant_Origin[0] - L_Sed - T_PlantWall;
    PlantUpperDC_Origin[1] - T_ChannelWall;
    Z_PlantUpperDCBottom - Slope_PlantDC*L_PlantUpperDC
], [
    Plant_Origin[0] - L_Sed - T_PlantWall - T_ChannelWall;
    PlantUpperDC_Origin[1] - T_ChannelWall - W_PlantDC;
    Z_PlantUpperDCBottom - Slope_PlantDC*(L_PlantUpperDC + T_ChannelWall)
], [270; 0; 0]*deg)
FiDrainChannelCutout := BoxF([
    Plant_Origin[0] - L_Sed - T_PlantWall - W_PlantDC - T_PlantWall;
    Plant_Origin[1] - 2*T_PlantWall - W_FiInletChannel - W_PlantDC - T_ChannelWall;
    Z_PlantLowerDCBottom + H_PlantDC
], [
    Plant_Origin[0] - L_Sed;
    Plant_Origin[1] - 2*T_PlantWall - W_FiInletChannel;
    Z_PlantLowerDCBottom - (L_PlantLowerDC - T_PlantWall - W_PlantDC)*Slope_PlantDC
], [0; 0; 0]*deg)
FiInletChannelCutout := BoxF([
    Plant_Origin[0] - L_Sed - T_PlantWall + L_PlantSideDC + T_ChannelWall;
    Plant_Origin[1] - 2*T_PlantWall - W_FiInletChannel - T_ChannelWall - W_PlantDC;
    Z_Walkway - T_Floor
], [
    Plant_Origin[0] - L_Sed - T_PlantWall;
    Plant_Origin[1] - 2*T_PlantWall - W_FiInletChannel - W_PlantDC;
    Z_FiInletChannelBottom - T_PlantWall
], [0; 0; 0]*deg)
MirrorFiInletChannelCutout := Mirror3dLast("yz", [Floc_Origin[0] - L_Floc - W_PlantDC/2 - T_PlantWall; 0 m], "n")
EtRMDCCutout := CylinderF(FlocCoupling_Origin + [0; -SocketDepth(ND_RMPipe); 0], outerradius(ND_RMPipe), 2*T_ChannelWall, [270; 0]*deg)
SubtractDCCutouts := SubtractF(["DrainChannelCon"], "DeleteMe")
SubtractDCSideCutouts := SubtractF(["DrainChannelSideCon"], "DeleteMe")
DCUpperWallsHigh := stack(DCWestWallLower, DCWestWallUpper, DCEastWallLower, DCEastWallUpper, DCNorthWall, Union_All, FrzDrainChannel)
DCUpperWalls :=
    stack(DCWestWallLower, DCWestWallUpper, DCEastWallLower, DCEastWallUpper, DCNorthWall, DrainChannelRMRecessWalls, Union_All, FrzDrainChannel) if Z_PlantLowerDCBottom > Z_PlantUpperDCBottom - Slope_PlantDC*L_PlantUpperDC - 10 cm
    stack(DCWestWallLower, DCWestWallUpper, DCEastWallLower, DCEastWallUpper, DCNorthWall, DCDropoffWall, DrainChannelRMRecessWalls, Union_All, FrzDrainChannel) otherwise
DCUpperSideWalls := stack(DCSideNorthWall, DCSideSouthWall, DCSideOuterWall, Union_All, FrzSideDrainChannel)
DCWallCutouts := stack(FiInletChannelDCCutout, SedDCCutout, DrainChannelRMRecessCutout1, DrainChannelBoxCutout, DrainChannelWedgeCutout, EtDrainChannelCutout, EtRMDCCutout, GroupDelete, SubtractDCCutouts)
DCWallCutoutsHigh := stack(SedDCCutout, MirrorSedDCCutout, DrainChannelBoxCutout, DrainChannelWedgeCutout, EtDrainChannelCutout, FiDrainChannelCutout, GroupDelete, SubtractDCCutouts)
DCSideWallCutouts := stack(FiInletChannelCutout, GroupDelete, SubtractDCSideCutouts)
PlantDrainChannelScript :=
    stack(MainDCScript, DCUpperWalls, DCWallCutouts) if EN_DoubleTrain == 0
    stack(MainDCScript, DCUpperWallsHigh, DCWallCutoutsHigh, SideDCScript, DCUpperSideWalls, DCSideWallCutouts, ThawMultiple(["DrainChannelCon"; "DrainChannelSideCon"]), Union_All, FreezeMultiple(["DrainChannelCon"; "DrainChannelSideCon"])) otherwise
# Filter Box Manifold Connections: Fernco Couplings, Outer Wall Couplings, and Through-wall Pipes
# Fernco Couplings
LayerFiFernco := layer_new("FiFerncoCouplingsPlu", purple)
FiFerncoBwCoupling := FerncoCouplingF(FiFerncoBwCoupling_origin, [
    {
        0 if EN_DoubleTrain == 0
        90 otherwise
    };
    0;
    0
]*deg, ND_FiBwTrunk, L_FiManFerncoCoupling)
FiFerncoCoupling := FerncoCouplingF(FiFerncoCouplings_origin, [
    {
        0 if EN_DoubleTrain == 0
        90 otherwise
    };
    0;
    0
], ND_FiTrunk, L_FiManFerncoCoupling)
ArrayFiManifoldLast := ArrayLast(N_FiLayer, 1, H_FiLayer)
LayerFiFerncoFreeze := FreezeLayer("FiFerncoCouplingsPlu")
FiFerncoScript := stack(LayerFiFernco, FiFerncoBwCoupling, FiFerncoCoupling, view("f"), ArrayFiManifoldLast, view("t"), LayerFiFerncoFreeze)
# Filter Wall Couplings
LayerFiFittingPlu := layer_new("FiFittingsPlu", green)
FiWallBwCoupling := CouplingF(FiWallBwCoupling_origin, [
    {
        0 if EN_DoubleTrain == 0
        (-90) otherwise
    };
    0
]*deg, ND_FiBwTrunk, PS_Default)
FiWallCoupling := CouplingF(FiWallCouplings_origin, [
    {
        0 if EN_DoubleTrain == 0
        (-90) otherwise
    };
    0
]*deg, ND_FiTrunk, PS_Default)
LayerFiFittingFrz := FreezeLayer("FiFittingsPlu")
FiWallCouplingScript := stack(LayerFiFittingPlu, FiWallBwCoupling, FiWallCoupling, view("f"), ArrayFiManifoldLast, view("t"), LayerFiFittingFrz)
# Through-wall Pipes
LayerFiPipePlu := layer_new("FiPipePlu", blue)
FiBwConPipe :=
    PipeSUBF(FiWallBwCoupling_origin - [CouplingLength(ND_FiBwTrunk) - 2*SocketDepth(ND_FiBwTrunk); 0 m; 0 m], L_FiManFerncoCoupling/2 + T_FiWall + SocketDepth(ND_FiBwTrunk), [0; 0; 0]*deg, ND_FiBwTrunk, PS_Default, ["FiTankCon"]) if EN_DoubleTrain == 0
    PipeSUBF(FiWallBwCoupling_origin + [0 m; 0 m; 0 m], L_FiManFerncoCoupling/2 + T_FiWall + SocketDepth(ND_FiBwTrunk), [90; 0; 0]*deg, ND_FiBwTrunk, PS_Default, ["FiTankCon"]) otherwise
FiConPipe1 :=
    PipeSUBF(FiWallCouplings_origin + [-CouplingLength(ND_FiTrunk) + 2*SocketDepth(ND_FiTrunk); 0 m; 0 m], L_FiManFerncoCoupling/2 + T_FiWall + SocketDepth(ND_FiTrunk), [0; 0; 0]*deg, ND_FiTrunk, PS_Default, ["FiTankCon"]) if EN_DoubleTrain == 0
    PipeSUBF(FiWallCouplings_origin + [0 m; 0 m; 0 m], L_FiManFerncoCoupling/2 + T_FiWall + SocketDepth(ND_FiTrunk), [90; 0; 0]*deg, ND_FiTrunk, PS_Default, ["FiTankCon"]) otherwise
FiConPipe2 :=
    PipeSUBF(FiWallCouplings_origin + [-CouplingLength(ND_FiTrunk) + 2*SocketDepth(ND_FiTrunk); 0 m; H_FiLayer], L_FiManFerncoCoupling/2 + T_FiWall + SocketDepth(ND_FiTrunk), [0; 0; 0]*deg, ND_FiTrunk, PS_Default, ["FiTankCon"]) if EN_DoubleTrain == 0
    PipeSUBF(FiWallCouplings_origin + [0 m; 0 m; H_FiLayer], L_FiManFerncoCoupling/2 + T_FiWall + SocketDepth(ND_FiTrunk), [90; 0; 0]*deg, ND_FiTrunk, PS_Default, ["FiTankCon"]) otherwise
FiConPipe3 :=
    PipeSUBF(FiWallCouplings_origin + [-CouplingLength(ND_FiTrunk) + 2*SocketDepth(ND_FiTrunk); 0 m; 2*H_FiLayer], L_FiManFerncoCoupling/2 + T_FiWall + SocketDepth(ND_FiTrunk), [0; 0; 0]*deg, ND_FiTrunk, PS_Default, ["FiTankCon"]) if EN_DoubleTrain == 0
    PipeSUBF(FiWallCouplings_origin + [0 m; 0 m; 2*H_FiLayer], L_FiManFerncoCoupling/2 + T_FiWall + SocketDepth(ND_FiTrunk), [90; 0; 0]*deg, ND_FiTrunk, PS_Default, ["FiTankCon"]) otherwise
FiConPipe4 :=
    PipeSUBF(FiWallCouplings_origin + [-CouplingLength(ND_FiTrunk) + 2*SocketDepth(ND_FiTrunk); 0 m; 3*H_FiLayer], L_FiManFerncoCoupling/2 + T_FiWall + SocketDepth(ND_FiTrunk), [0; 0; 0]*deg, ND_FiTrunk, PS_Default, ["FiTankCon"]) if EN_DoubleTrain == 0
    PipeSUBF(FiWallCouplings_origin + [0 m; 0 m; 3*H_FiLayer], L_FiManFerncoCoupling/2 + T_FiWall + SocketDepth(ND_FiTrunk), [90; 0; 0]*deg, ND_FiTrunk, PS_Default, ["FiTankCon"]) otherwise
FiConPipe5 :=
    PipeSUBF(FiWallCouplings_origin + [-CouplingLength(ND_FiTrunk) + 2*SocketDepth(ND_FiTrunk); 0 m; 4*H_FiLayer], L_FiManFerncoCoupling/2 + T_FiWall + SocketDepth(ND_FiTrunk), [0; 0; 0]*deg, ND_FiTrunk, PS_Default, ["FiTankCon"]) if EN_DoubleTrain == 0
    PipeSUBF(FiWallCouplings_origin + [0 m; 0 m; 4*H_FiLayer], L_FiManFerncoCoupling/2 + T_FiWall + SocketDepth(ND_FiTrunk), [90; 0; 0]*deg, ND_FiTrunk, PS_Default, ["FiTankCon"]) otherwise
FiConPipe6 :=
    PipeSUBF(FiWallCouplings_origin + [-CouplingLength(ND_FiTrunk) + 2*SocketDepth(ND_FiTrunk); 0 m; 5*H_FiLayer], L_FiManFerncoCoupling/2 + T_FiWall + SocketDepth(ND_FiTrunk), [0; 0; 0]*deg, ND_FiTrunk, PS_Default, ["FiTankCon"]) if EN_DoubleTrain == 0
    PipeSUBF(FiWallCouplings_origin + [0 m; 0 m; 5*H_FiLayer], L_FiManFerncoCoupling/2 + T_FiWall + SocketDepth(ND_FiTrunk), [90; 0; 0]*deg, ND_FiTrunk, PS_Default, ["FiTankCon"]) otherwise
LayerFiPipeFrz := FreezeLayer("FiPipePlu")
FiWallPipeScript := stack(LayerFiPipePlu, FiBwConPipe, FiConPipe1, FiConPipe2, FiConPipe3, FiConPipe4, FiConPipe5, FiConPipe6, LayerFiPipeFrz)
FiManWallScript := stack(FiFerncoScript, FiWallCouplingScript, FiWallPipeScript)
# Manifold Trunks and Branch Receivers
# Branch Receivers
LayerFiManPipe := layer_new("FiManPipePlu", blue)
FiBranchHolder := PipeF({
    if EN_DoubleTrain == 0
        [
            Fi_origin[0] - CapThickness(ND_FiBranchHolder) - S_FiManAssembly;
            Fi_origin[1] + ConRadius(ND_FiBwBranchHolder) + S_FiManAssembly;
            Fi_origin[2] + H_FiBottomLayer + outerradius(ND_FiBwManBranch)
        ]
    otherwise
        [
            Fi_origin[0] + ConRadius(ND_FiBwBranchHolder) + S_FiManAssembly - W_Fi;
            Fi_origin[1] + CapThickness(ND_FiBranchHolder) + S_FiManAssembly;
            Fi_origin[2] + H_FiBottomLayer + outerradius(ND_FiBwManBranch)
        ]
}, L_Fi - 2*CapThickness(ND_FiBranchHolder) - 2*S_FiManAssembly, {
    ([0; 0]*deg) if EN_DoubleTrain == 0
    ([-90; 0]*deg) otherwise
}, ND_FiBranchHolder, PS_Default)
LayerFiManCaps := layer_new("FiManCapPlu", green)
FiBranchHolderCapRight :=
    if EN_DoubleTrain == 0
        CapF([
            Fi_origin[0] - CapThickness(ND_FiBranchHolder) - S_FiManAssembly;
            Fi_origin[1] + ConRadius(ND_FiBwBranchHolder) + S_FiManAssembly;
            Fi_origin[2] + H_FiBottomLayer + outerradius(ND_FiBwManBranch)
        ], [0; 0]*deg, ND_FiBranchHolder)
    otherwise
        CapF([
            Fi_origin[0] + ConRadius(ND_FiBwBranchHolder) + S_FiManAssembly - W_Fi;
            Fi_origin[1] + CapThickness(ND_FiBranchHolder) + S_FiManAssembly;
            Fi_origin[2] + H_FiBottomLayer + outerradius(ND_FiBwManBranch)
        ], [270; 0]*deg, ND_FiBranchHolder)
FiBranchHolderCapLeft :=
    if EN_DoubleTrain == 0
        CapF([
            Fi_origin[0] - L_Fi + S_FiManAssembly + CapThickness(ND_FiBranchHolder);
            Fi_origin[1] + ConRadius(ND_FiBwBranchHolder) + S_FiManAssembly;
            Fi_origin[2] + H_FiBottomLayer + outerradius(ND_FiBwManBranch)
        ], [180; 0]*deg, ND_FiBranchHolder)
    otherwise
        CapF([
            Fi_origin[0] + ConRadius(ND_FiBwBranchHolder) + S_FiManAssembly - W_Fi;
            Fi_origin[1] - CapThickness(ND_FiBranchHolder) - S_FiManAssembly + L_Fi;
            Fi_origin[2] + H_FiBottomLayer + outerradius(ND_FiBwManBranch)
        ], [90; 0]*deg, ND_FiBranchHolder)
ArrayFiBranchHolder :=
    Array_All(2, 1, W_Fi - 2*ConRadius(ND_FiBwBranchHolder) - 2*S_FiManAssembly) if EN_DoubleTrain == 0
    Array_All(1, 2, W_Fi - 2*ConRadius(ND_FiBwBranchHolder) - 2*S_FiManAssembly) otherwise
FiManBranchRecThaw := ThawMultiple(["FiManPipePlu"; "FiManCapPlu"])
FiManPipeFrz := FreezeLayer("FiManPipePlu")
FiManCapFrz := FreezeLayer("FiManCapPlu")
FiManBranchRecFrz := FreezeMultiple(["FiManPipePlu"; "FiManCapPlu"])
FiBranchHolderScript := stack(LayerFiManPipe, FiBranchHolder, FiManPipeFrz, LayerFiManCaps, FiBranchHolderCapRight, FiBranchHolderCapLeft, FiManCapFrz, FiManBranchRecThaw, ArrayFiBranchHolder, FiManBranchRecFrz)
# Manifold Trunks
SelectFiManPipes := SelectLayer("FiManPipePlu")
FiTrunk :=
    if EN_DoubleTrain == 0
        PipeF([
            Fi_origin[0] - L_FiManFerncoCoupling/2;
            FiBwInletCoupling_origin[1];
            Fi_origin[2] + H_FiBottomLayer + outerradius(ND_FiBwManBranch)
        ], L_FiTrunk, [0; 0]*deg, ND_FiTrunk, PS_Default)
    otherwise
        PipeF([
            FiBwInletCoupling_origin[0];
            Fi_origin[1] - L_FiManFerncoCoupling/2 + L_Fi;
            Fi_origin[2] + H_FiBottomLayer + outerradius(ND_FiBwManBranch)
        ], L_FiTrunk, [90; 0]*deg, ND_FiTrunk, PS_Default)
SelectFiManCaps := SelectLayer("FiManCapPlu")
FiTrunkCap :=
    if EN_DoubleTrain == 0
        CapF([
            Fi_origin[0] - L_FiManFerncoCoupling/2 - L_FiTrunk;
            FiBwInletCoupling_origin[1];
            Fi_origin[2] + H_FiBottomLayer + outerradius(ND_FiBwManBranch)
        ], [180; 0]*deg, ND_FiTrunk)
    otherwise
        CapF([
            FiBwInletCoupling_origin[0];
            Fi_origin[1] - L_FiManFerncoCoupling/2 - L_FiTrunk + L_Fi;
            Fi_origin[2] + H_FiBottomLayer + outerradius(ND_FiBwManBranch)
        ], [-90; 0]*deg, ND_FiTrunk)
FiTrunkScript := stack(SelectFiManPipes, FiTrunk, FiManPipeFrz, SelectFiManCaps, FiTrunkCap, FiManCapFrz)
# Trunk and Branch Receiver Holes and Array
FiTrunkOrifice :=
    if EN_DoubleTrain == 0
        CylinderF([
            Fi_origin[0] - L_FiManFerncoCoupling - B_FiManifoldBranch/2;
            Fi_origin[1] + S_FiManAssembly + ConRadius(ND_FiBwBranchHolder);
            Fi_origin[2] + H_FiBottomLayer + outerradius(ND_FiBwManBranch)
        ], outerradius(ND_FiManBranch), W_Fi - 2*ConRadius(ND_FiBwBranchHolder) - 2*S_FiManAssembly, [-90; 0]*deg)
    otherwise
        CylinderF([
            Fi_origin[0] - S_FiManAssembly - ConRadius(ND_FiBwBranchHolder);
            Fi_origin[1] - L_FiManFerncoCoupling - B_FiManifoldBranch/2 + L_Fi;
            Fi_origin[2] + H_FiBottomLayer + outerradius(ND_FiBwManBranch)
        ], outerradius(ND_FiManBranch), W_Fi - 2*ConRadius(ND_FiBwBranchHolder) - 2*S_FiManAssembly, [0; 0]*deg)
ArrayFiTrunkOrifice :=
    ArrayLast(1, N_FiManBranch/2, -B_FiManifoldBranch) if EN_DoubleTrain == 0
    ArrayLast(N_FiManBranch/2, 1, -B_FiManifoldBranch) otherwise
SubtractFiManPipeOrifices := SubtractF(["FiManPipePlu"], "DeleteMe")
SubtractFiManCapOrifices := SubtractF(["FiManCapPlu"], "DeleteMe")
ArrayFiTrunks := array_all(N_FiLayer, 1, H_FiLayer)
FiManTrunkOrificeScript := stack(FiTrunkOrifice, ArrayFiTrunkOrifice, GroupDelete, SubtractFiManPipeOrifices, FiTrunkOrifice, ArrayFiTrunkOrifice, GroupDelete, SubtractFiManCapOrifices, SelectFiManPipes, SelectFiManCaps, view("f"), ArrayFiTrunks, view("t"), FiManPipeFrz, FiManCapFrz)
# Backwash Trunk
FiBwTrunk :=
    if EN_DoubleTrain == 0
        PipeF([
            Fi_origin[0] - L_FiManFerncoCoupling/2;
            FiBwInletCoupling_origin[1];
            Fi_origin[2] + outerradius(ND_FiBwManBranch)
        ], L_FiBwTrunk, [0; 0]*deg, ND_FiBwTrunk, PS_Default)
    otherwise
        PipeF([
            FiBwInletCoupling_origin[0];
            Fi_origin[1] - L_FiManFerncoCoupling/2 + L_Fi;
            Fi_origin[2] + outerradius(ND_FiBwManBranch)
        ], L_FiBwTrunk, [90; 0]*deg, ND_FiBwTrunk, PS_Default)
FiBwTrunkCap :=
    if EN_DoubleTrain == 0
        CapF([
            Fi_origin[0] - L_FiManFerncoCoupling/2 - L_FiBwTrunk;
            FiBwInletCoupling_origin[1];
            Fi_origin[2] + outerradius(ND_FiBwManBranch)
        ], [180; 0; 0]*deg, ND_FiBwTrunk)
    otherwise
        CapF([
            FiBwInletCoupling_origin[0];
            Fi_origin[1] - L_FiManFerncoCoupling/2 - L_FiBwTrunk + L_Fi;
            Fi_origin[2] + outerradius(ND_FiBwManBranch)
        ], [-90; 0; 0]*deg, ND_FiBwTrunk)
FiBwManTrunkScript := stack(SelectFiManPipes, FiBwTrunk, FiManPipeFrz, SelectFiManCaps, FiBwTrunkCap, FiManCapFrz)
# Backwash Branch Receivers
FiBwBranchReceiver :=
    if EN_DoubleTrain == 0
        PipeF([
            Fi_origin[0] - CapThickness(ND_FiBwBranchHolder) - S_FiManAssembly;
            Fi_origin[1] + ConRadius(ND_FiBwBranchHolder) + S_FiManAssembly;
            Fi_origin[2] + outerradius(ND_FiBwManBranch)
        ], L_Fi - 2*CapThickness(ND_FiBranchHolder) - 2*S_FiManAssembly, [0; 0]*deg, ND_FiBwBranchHolder, PS_Default)
    otherwise
        PipeF([
            Fi_origin[0] + (ConRadius(ND_FiBwBranchHolder) + S_FiManAssembly) - W_Fi;
            Fi_origin[1] + CapThickness(ND_FiBwBranchHolder) + S_FiManAssembly;
            Fi_origin[2] + outerradius(ND_FiBwManBranch)
        ], L_Fi - 2*CapThickness(ND_FiBranchHolder) - 2*S_FiManAssembly, [-90; 0]*deg, ND_FiBwBranchHolder, PS_Default)
FiBwBranchReceiverCapR :=
    if EN_DoubleTrain == 0
        CapF([
            Fi_origin[0] - CapThickness(ND_FiBwBranchHolder) - S_FiManAssembly;
            Fi_origin[1] + ConRadius(ND_FiBwBranchHolder) + S_FiManAssembly;
            Fi_origin[2] + outerradius(ND_FiBwManBranch)
        ], [0; 0; 0]*deg, ND_FiBwBranchHolder)
    otherwise
        CapF([
            Fi_origin[0] + (ConRadius(ND_FiBwBranchHolder) + S_FiManAssembly) - W_Fi;
            (Fi_origin[1] + CapThickness(ND_FiBwBranchHolder)) + S_FiManAssembly;
            Fi_origin[2] + outerradius(ND_FiBwManBranch)
        ], [-90; 0; 0]*deg, ND_FiBwBranchHolder)
FiBwBranchReceiverCapL :=
    if EN_DoubleTrain == 0
        CapF([
            Fi_origin[0] - L_Fi + S_FiManAssembly + CapThickness(ND_FiBwBranchHolder);
            Fi_origin[1] + ConRadius(ND_FiBwBranchHolder) + S_FiManAssembly;
            Fi_origin[2] + outerradius(ND_FiBwManBranch)
        ], [180; 0; 0]*deg, ND_FiBwBranchHolder)
    otherwise
        CapF([
            Fi_origin[0] + (ConRadius(ND_FiBwBranchHolder) + S_FiManAssembly) - W_Fi;
            Fi_origin[1] + L_Fi - S_FiManAssembly - CapThickness(ND_FiBwBranchHolder);
            Fi_origin[2] + outerradius(ND_FiBwManBranch)
        ], [90; 0; 0]*deg, ND_FiBwBranchHolder)
ArrayFiBwBranchHolder :=
    ArrayLast(2, 1, W_Fi - 2*ConRadius(ND_FiBwBranchHolder) - 2*S_FiManAssembly) if EN_DoubleTrain == 0
    ArrayLast(1, 2, W_Fi - 2*ConRadius(ND_FiBwBranchHolder) - 2*S_FiManAssembly) otherwise
FiBwBranchReceiverScript := stack(SelectFiManPipes, FiBwBranchReceiver, ArrayFiBwBranchHolder, FiManPipeFrz, SelectFiManCaps, FiBwBranchReceiverCapR, ArrayFiBwBranchHolder, FiBwBranchReceiverCapL, ArrayFiBwBranchHolder, FiManCapFrz)
# Backwash Trunk and Branch Receiver Orifices
FiBwTrunkOrifice :=
    if EN_DoubleTrain == 0
        CylinderF([
            Fi_origin[0] - L_FiManFerncoCoupling - B_FiManifoldBranch/2;
            Fi_origin[1] + ConRadius(ND_FiBwBranchHolder) + S_FiManAssembly;
            Fi_origin[2] + outerradius(ND_FiBwManBranch)
        ], outerradius(ND_FiBwManBranch), W_Fi - 2*ConRadius(ND_FiBwBranchHolder) - 2*S_FiManAssembly, [-90; 0]*deg)
    otherwise
        CylinderF([
            Fi_origin[0] - (ConRadius(ND_FiBwBranchHolder) + S_FiManAssembly);
            Fi_origin[1] - L_FiManFerncoCoupling - B_FiManifoldBranch/2 + L_Fi;
            Fi_origin[2] + outerradius(ND_FiBwManBranch)
        ], outerradius(ND_FiBwManBranch), W_Fi - 2*ConRadius(ND_FiBwBranchHolder) - 2*S_FiManAssembly, [0; 0]*deg)
FiBwTrunkOrificeScript := stack(FiBwTrunkOrifice, ArrayFiTrunkOrifice, GroupDelete, SubtractFiManPipeOrifices, FiBwTrunkOrifice, ArrayFiTrunkOrifice, GroupDelete, SubtractFiManCapOrifices)
# Filter Box Floor Cutouts
FiBwTrunkCutout :=
    if EN_DoubleTrain == 0
        BoxF([
            Fi_origin[0];
            Fi_origin[1] + W_Fi/2 - ConRadius(ND_FiBwTrunk);
            Fi_origin[2] - max(ConRadius(ND_FiBwTrunk), FerncoOuterDiameter(ND_FiBwTrunk)/2) + outerradius(ND_FiBwManBranch)
        ], [Fi_origin[0] - L_Fi; Fi_origin[1] + W_Fi/2 + ConRadius(ND_FiBwTrunk); Fi_origin[2]], [0; 0; 0]*deg)
    otherwise
        BoxF([
            Fi_origin[0] - (W_Fi/2 - ConRadius(ND_FiBwTrunk));
            Fi_origin[1];
            Fi_origin[2] - max(ConRadius(ND_FiBwTrunk), FerncoOuterDiameter(ND_FiBwTrunk)/2) + outerradius(ND_FiBwManBranch)
        ], [Fi_origin[0] - (W_Fi/2 + ConRadius(ND_FiBwTrunk)); Fi_origin[1] + L_Fi; Fi_origin[2]], [0; 0; 0]*deg)
FiBwBranchHolderCutout1 :=
    if EN_DoubleTrain == 0
        BoxF([
            Fi_origin[0];
            Fi_origin[1];
            Fi_origin[2] - ConRadius(ND_FiBwBranchHolder) + outerradius(ND_FiBwManBranch)
        ], [
            Fi_origin[0] - L_Fi;
            Fi_origin[1] + S_FiManAssembly + 2*ConRadius(ND_FiBwBranchHolder);
            Fi_origin[2]
        ], [0; 0; 0]*deg)
    otherwise
        BoxF([
            Fi_origin[0];
            Fi_origin[1];
            Fi_origin[2] - ConRadius(ND_FiBwBranchHolder) + outerradius(ND_FiBwManBranch)
        ], [
            Fi_origin[0] - (S_FiManAssembly + 2*ConRadius(ND_FiBwBranchHolder));
            Fi_origin[1] + L_Fi;
            Fi_origin[2]
        ], [0; 0; 0]*deg)
FiBwBranchHolderCutout2 :=
    if EN_DoubleTrain == 0
        BoxF([
            Fi_origin[0];
            Fi_origin[1] + W_Fi;
            Fi_origin[2] - ConRadius(ND_FiBwBranchHolder) + outerradius(ND_FiBwManBranch)
        ], [
            Fi_origin[0] - L_Fi;
            Fi_origin[1] + W_Fi - 2*ConRadius(ND_FiBwBranchHolder) - S_FiManAssembly;
            Fi_origin[2]
        ], [0; 0; 0]*deg)
    otherwise
        BoxF([
            Fi_origin[0] - W_Fi;
            Fi_origin[1];
            Fi_origin[2] - ConRadius(ND_FiBwBranchHolder) + outerradius(ND_FiBwManBranch)
        ], [
            Fi_origin[0] - W_Fi + 2*ConRadius(ND_FiBwBranchHolder) + S_FiManAssembly;
            Fi_origin[1] + L_Fi;
            Fi_origin[2]
        ], [0; 0; 0]*deg)
SubtractBwTrunkCutouts := SubtractF(["FiTankCon"], "DeleteMe")
FiBoxFloorCutoutScript := stack(FiBwTrunkCutout, FiBwBranchHolderCutout1, FiBwBranchHolderCutout2, GroupDelete, SubtractBwTrunkCutouts)
FiTrunkReceiverScript := stack(FiBranchHolderScript, FiTrunkScript, FiManTrunkOrificeScript, FiBwManTrunkScript, FiBwBranchReceiverScript, FiBwTrunkOrificeScript, FiBoxFloorCutoutScript)
# Manifold Branches
LayerMan := layer_new("FiManBranchPlu", blue3)
FiManBranch :=
    if EN_DoubleTrain == 0
        PipeF(Fi_origin + [
            -L_FiManFerncoCoupling - B_FiManifoldBranch/2;
            S_FiManAssembly + ConRadius(ND_FiBwBranchHolder) + outerradius(ND_FiBranchHolder) - L_FiManBranchExt;
            outerradius(ND_FiBwManBranch) + H_FiBottomLayer
        ], L_FiManBranch, [-90; 0]*deg, ND_FiManBranch, PS_FiBranch)
    otherwise
        PipeF(Fi_origin + [
            -S_FiManAssembly - ConRadius(ND_FiBwBranchHolder) - outerradius(ND_FiBranchHolder) + L_FiManBranchExt;
            -L_FiManFerncoCoupling - B_FiManifoldBranch/2 + L_Fi;
            outerradius(ND_FiBwManBranch) + H_FiBottomLayer
        ], L_FiManBranch, [0; 0]*deg, ND_FiManBranch, PS_FiBranch)
FreezeFiManLayer := FreezeLayer("FiManBranchPlu")
FiManBranchSlot :=
    if EN_DoubleTrain == 0
        BoxF(Fi_origin + [
            -L_FiManFerncoCoupling - B_FiManifoldBranch/2 - outerradius(ND_FiManBranch);
            S_FiManAssembly + ConRadius(ND_FiBwBranchHolder) + outerradius(ND_FiBranchHolder) + B_FiManSlot/2;
            outerradius(ND_FiBwManBranch) + H_FiBottomLayer + H_FiManCenterToSlot
        ], Fi_origin + [
            -L_FiManFerncoCoupling - B_FiManifoldBranch/2 + outerradius(ND_FiManBranch);
            S_FiManAssembly + ConRadius(ND_FiBwBranchHolder) + outerradius(ND_FiBranchHolder) + B_FiManSlot/2 + W_FiManSlots;
            outerradius(ND_FiBwManBranch) + H_FiBottomLayer + outerradius(ND_FiManBranch)
        ], [0; 0; 0]*deg)
    otherwise
        BoxF(Fi_origin + [
            -S_FiManAssembly - ConRadius(ND_FiBwBranchHolder) - outerradius(ND_FiBranchHolder) - B_FiManSlot/2;
            -L_FiManFerncoCoupling - B_FiManifoldBranch/2 - outerradius(ND_FiManBranch);
            outerradius(ND_FiBwManBranch) + H_FiBottomLayer + H_FiManCenterToSlot
        ], Fi_origin + [
            -(S_FiManAssembly + ConRadius(ND_FiBwBranchHolder) + outerradius(ND_FiBranchHolder) + B_FiManSlot/2 + W_FiManSlots);
            -L_FiManFerncoCoupling - B_FiManifoldBranch/2 + outerradius(ND_FiManBranch);
            outerradius(ND_FiBwManBranch) + H_FiBottomLayer + outerradius(ND_FiManBranch)
        ], [90; 0; 0]*deg)
MirrorFiManBranchSlot := MirrorLast([Fi_origin[1] + 0 m; Fi_origin[2] + outerradius(ND_FiBwManBranch) + H_FiBottomLayer], [Fi_origin[1] + zc; Fi_origin[2] + outerradius(ND_FiBwManBranch) + H_FiBottomLayer], "N")
ArrayFiManBranchSlot :=
    array_all(N_FiManSlotsPerRow, 1, B_FiManSlot) if EN_DoubleTrain == 0
    array_all(1, N_FiManSlotsPerRow, B_FiManSlot) otherwise
SubtractFiManSlots := SubtractF(["FiManBranchPlu"], "DeleteMe")
SelectFiManBranch := SelectLayer("FiManBranchPlu")
ArrayFiMan := array_all(N_FiLayer, 1, H_FiLayer)
# Do not stack unless you are drawing only the slotted pipes. The slots make the 3D model unmanagable.
FiBranchScriptSlots := stack(LayerMan, FiManBranch, FreezeFiManLayer, FiManBranchSlot, view("r"), MirrorFiManBranchSlot, view("t"), ArrayFiManBranchSlot, GroupDelete, SubtractFiManSlots, SelectFiManBranch, BrepAll, view("f"), ArrayFiMan, view("t"))
FiBranchScript := stack(LayerMan, FiManBranch, view("f"), ArrayFiMan, view("t"))
BwManBranch :=
    if EN_DoubleTrain == 0
        PipeF(Fi_origin + [
            -L_FiManFerncoCoupling - B_FiManifoldBranch/2;
            S_FiManAssembly + ConRadius(ND_FiBwBranchHolder) + outerradius(ND_FiBwBranchHolder) - L_FiManBranchExt;
            outerradius(ND_FiBwManBranch)
        ], L_FiBwManBranch, [-90; 0]*deg, ND_FiBwManBranch, PS_FiBranch)
    otherwise
        PipeF(Fi_origin + [
            -(S_FiManAssembly + ConRadius(ND_FiBwBranchHolder) + outerradius(ND_FiBwBranchHolder) - L_FiManBranchExt);
            -L_FiManFerncoCoupling - B_FiManifoldBranch/2 + L_Fi;
            outerradius(ND_FiBwManBranch)
        ], L_FiBwManBranch, [0; 0]*deg, ND_FiBwManBranch, PS_FiBranch)
FiBwManBranchSlot :=
    if EN_DoubleTrain == 0
        BoxF(Fi_origin + [
            -L_FiManFerncoCoupling - B_FiManifoldBranch/2 - outerradius(ND_FiBwManBranch);
            S_FiManAssembly + ConRadius(ND_FiBwBranchHolder) + outerradius(ND_FiBwBranchHolder) + B_FiBwManSlot/2;
            outerradius(ND_FiBwManBranch) + H_FiBwManCenterToSlot
        ], Fi_origin + [
            -L_FiManFerncoCoupling - B_FiManifoldBranch/2 + outerradius(ND_FiBwManBranch);
            S_FiManAssembly + ConRadius(ND_FiBwBranchHolder) + outerradius(ND_FiBwBranchHolder) + B_FiBwManSlot/2 + W_FiManSlots;
            outerdiameter(ND_FiBwManBranch)
        ], [0; 0; 0]*deg)
    otherwise
        BoxF(Fi_origin + [
            -(S_FiManAssembly + ConRadius(ND_FiBwBranchHolder) + outerradius(ND_FiBwBranchHolder) + B_FiBwManSlot/2);
            -L_FiManFerncoCoupling - B_FiManifoldBranch/2 - outerradius(ND_FiBwManBranch);
            outerradius(ND_FiBwManBranch) + H_FiBwManCenterToSlot
        ], Fi_origin + [
            -(S_FiManAssembly + ConRadius(ND_FiBwBranchHolder) + outerradius(ND_FiBwBranchHolder) + B_FiBwManSlot/2 + W_FiManSlots);
            -L_FiManFerncoCoupling - B_FiManifoldBranch/2 + outerradius(ND_FiBwManBranch);
            outerdiameter(ND_FiBwManBranch)
        ], [90; 0; 0]*deg)
ArrayFiBwManBranchSlot :=
    ArrayLast(N_FiBwManSlotsPerRow, 1, B_FiBwManSlot) if EN_DoubleTrain == 0
    ArrayLast(1, N_FiBwManSlotsPerRow, B_FiBwManSlot) otherwise
MirrorFiManBranches :=
    Mirror3dAll("zx", [Fi_origin[0]; Fi_origin[1] + W_Fi/2], "n") if EN_DoubleTrain == 0
    Mirror3dAll("yz", [Fi_origin[0] - W_Fi/2; Fi_origin[1]], "n") otherwise
ArrayManBranches :=
    array_all(1, N_FiManBranch/2, -B_FiManifoldBranch) if EN_DoubleTrain == 0
    array_all(N_FiManBranch/2, 1, -B_FiManifoldBranch) otherwise
# Do not stack unless you are drawing only the slotted pipes. The slots make the 3D model unmanagable.
FiBwBranchScriptSlots := stack(BwManBranch, FreezeFiManLayer, FiBwManBranchSlot, ArrayFiBwManBranchSlot, GroupDelete, SubtractFiManSlots, SelectFiManBranch, BrepAll, ArrayManBranches, MirrorFiManBranches, FreezeFiManLayer)
FiBwBranchScript := stack(BwManBranch, ArrayManBranches, MirrorFiManBranches, FreezeFiManLayer)
FiManBranchScript := stack(FiBranchScript, FiBwBranchScript)
FiManifoldScript := stack(FiManWallScript, FiTrunkReceiverScript, FiManBranchScript)
# Auxiliary Box Concrete
# Entrance and Exit Boxes
LayerFiEntExitBox := layer_new("FiEntExitBoxCon", grey)
FiEntBox := Tank(FiEntranceBox_origin, FiEntranceBox_dim, T_PlantWall)
FiExitBox := Tank(FiExitBox_origin, FiExitBox_dim, T_PlantWall)
LayerFiEntExitBoxFrz := FreezeLayer("FiEntExitBoxCon")
# Overflow and Distribution Boxes
LayerFiOFDistBox := layer_new("FiOverflowDistBoxCon", grey)
FiDistBox_Dim = [0.5183; 0.457155; 1.19368] m
FiDistBox := Tank(FiDistBox_Origin, FiDistBox_Dim, T_PlantWall)
FiOverflowBox := Tank(FiOverflowBox_Origin, FiOverflowBox_Dim, T_PlantWall)
FiOverflowBoxBase :=
    if EN_DoubleTrain == 0
        BoxF(FiOverflowBox_Origin + [T_PlantWall; -T_PlantWall; -T_PlantWall], [
            FiOverflowBox_Origin[0] - FiOverflowBox_Dim[0];
            FiOverflowBox_Origin[1] + FiOverflowBox_Dim[1] + T_PlantWall;
            FiEntranceBox_origin[2] - T_PlantWall
        ], [0; 0; 0]*deg)
    otherwise
        BoxF(FiOverflowBox_Origin + [T_PlantWall; 0; -T_PlantWall], [
            FiOverflowBox_Origin[0] - FiOverflowBox_Dim[0] - T_PlantWall;
            FiOverflowBox_Origin[1] + FiOverflowBox_Dim[1] + T_PlantWall;
            FiEntranceBox_origin[2] - T_PlantWall
        ], [0; 0; 0]*deg)
LayerFiOFDistBoxFrz := FreezeLayer("FiOverflowDistBoxCon")
# Entrance Box Air Removal
# Here are the baffels!
FiAirRemovalBlockSlot :=
    if EN_DoubleTrain == 0
        BoxF([
            FiEntranceBox_origin[0] - S_FiEntranceBaffle - T_SedWeir - S_FiBaffleToBlock;
            FiEntranceBox_origin[1] - T_ConcreteMin;
            Z_FiAirRemovalBlockBottom
        ], [
            FiEntranceBox_origin[0] - S_FiEntranceBaffle - T_SedWeir - S_FiBaffleToBlock;
            FiEntranceBox_origin[1] + T_ConcreteMin;
            Z_FiEntranceBottom + H_FiEntrance
        ] + [-W_FiAirRemovalBlock; W_FiEntrance; 0], [0; 0; 0])
    otherwise
        BoxF([
            FiEntranceBox_origin[0] - T_ConcreteMin - W_FiEntrance;
            FiEntranceBox_origin[1] - S_FiEntranceBaffle - T_SedWeir - S_FiBaffleToBlock + L_FiEntrance;
            Z_FiAirRemovalBlockBottom
        ], [
            FiEntranceBox_origin[0] + T_ConcreteMin;
            FiEntranceBox_origin[1] - S_FiEntranceBaffle - T_SedWeir - S_FiBaffleToBlock + L_FiEntrance;
            Z_FiEntranceBottom + H_FiEntrance
        ] - [0; W_FiAirRemovalBlock; 0], [0; 0; 0])
FiBaffle :=
    BoxF([FiEntranceBox_origin[0]; FiEntranceBox_origin[1] - T_ConcreteMin; Z_FiEntranceBottom] + [-S_FiEntranceBaffle; 0; S_FiEntranceBaffle], [FiEntranceBox_origin[0]; FiEntranceBox_origin[1]; Z_FiEntranceBottom] + [-S_FiEntranceBaffle - T_SedWeir; W_FiEntrance + T_ConcreteMin; H_FiEntrance], [0; 0; 0]) if EN_DoubleTrain == 0
    otherwise
        BoxF([
            FiEntranceBox_origin[0] - T_ConcreteMin - W_FiEntrance;
            FiEntranceBox_origin[1] + L_FiEntrance;
            Z_FiEntranceBottom
        ] + [0 m; -S_FiEntranceBaffle; S_FiEntranceBaffle], [FiEntranceBox_origin[0]; FiEntranceBox_origin[1] + L_FiEntrance; Z_FiEntranceBottom] + [T_ConcreteMin; -S_FiEntranceBaffle - T_SedWeir; H_FiEntrance], [0; 0; 0])
FiSubtractBaffleEntSlots := SubtractF(["FiEntExitBoxCon"], "DeleteMe")
FiSubtractBaffleOverflowSlots := SubtractF(["FiOverflowDistBoxCon"], "DeleteMe")  # Here is that magic distance into the concrete!
T_ConcreteMin = 0.05 m
ArrayFiBaffleSlots :=
    array_all(2, 1, -(W_FiEntrance + W_FiOverflow + 2*T_PlantWall)) if EN_DoubleTrain == 0
    array_all(1, 2, W_FiEntrance + W_FiOverflow + 2*T_ChannelWall) otherwise
FiBaffleSlots :=
    stack(FiAirRemovalBlockSlot, FiBaffle, GroupDelete, FiSubtractBaffleEntSlots, FiAirRemovalBlockSlot, FiBaffle, GroupDelete, FiSubtractBaffleOverflowSlots) if N_Fi == 1
    stack(FiAirRemovalBlockSlot, FiBaffle, GroupDelete, FiSubtractBaffleEntSlots, FiAirRemovalBlockSlot, FiBaffle, ArrayFiBaffleSlots, GroupDelete, FiSubtractBaffleOverflowSlots) otherwise
FiBaffleLayer := layer_new("FiBaffles", ltgrey)
FiAirRemovalBlock :=
    if EN_DoubleTrain == 0
        BoxF([
            FiEntranceBox_origin[0] - S_FiEntranceBaffle - T_SedWeir - S_FiBaffleToBlock;
            FiEntranceBox_origin[1] - T_ConcreteMin;
            Z_FiAirRemovalBlockBottom
        ], [
            FiEntranceBox_origin[0] - S_FiEntranceBaffle - 2*T_SedWeir - S_FiBaffleToBlock;
            FiEntranceBox_origin[1] + T_ConcreteMin + W_FiEntrance;
            Z_FiAirRemovalBlockTop
        ], [0; 0; 0])
    otherwise
        BoxF([
            FiEntranceBox_origin[0] - (T_ConcreteMin + W_FiEntrance);
            FiEntranceBox_origin[1] - S_FiEntranceBaffle - T_SedWeir - S_FiBaffleToBlock + L_FiEntrance;
            Z_FiAirRemovalBlockBottom
        ], [
            FiEntranceBox_origin[0] + T_ConcreteMin;
            FiEntranceBox_origin[1] - S_FiEntranceBaffle - 2*T_SedWeir - S_FiBaffleToBlock + L_FiEntrance;
            Z_FiAirRemovalBlockTop
        ], [0; 0; 0])
FiBaffleLayerFrz := FreezeLayer("FiBaffles")
FiBaffles := stack(FiBaffleLayer, FiBaffle, FiAirRemovalBlock, FiBaffleLayerFrz)
FiAuxBoxScript := stack(LayerFiEntExitBox, FiEntBox, FiExitBox, Union_All, LayerFiEntExitBoxFrz, LayerFiOFDistBox, FiDistBox, FiOverflowBox, FiOverflowBoxBase, LayerFiOFDistBoxFrz, FiBaffleSlots, FiBaffles)
# Auxiliary Box Plumbing (not filter entrance or exit)
Z_FiOverflowVertDrainPipeStart := Z_FiOverflowBottom - CouplingLength(ND_FiEntOverflow) + SocketDepth(ND_FiEntOverflow) = 1.47325 m
Z_FiOverflowVertDrainPipeEnd := FiEntranceBox_origin[2] - T_PlantWall - 2*SocketDepth(ND_FiEntOverflow) - S_Fitting = 0.461005 m
# Changed by mrf222 6/24/14
# made deeper
X_FiOverflowHorizDrainPipeStart := FiInletChannel_Origin[0] + T_PlantWall - CouplingLength(ND_FiEntOverflow) + SocketDepth(ND_FiEntOverflow)
# Here is a case where the code needs to be made more robust:
# If EN.DoubleTrain is more than zero, then the pipes all rotate 90 degrees. I'm nto sure how the addition of the front bow will change this, of if its configuration needs the be altered as well.
X_FiOverflowHorizDrainPipeEnd := FiEntranceBox_origin[0] - L_FiEntrance/2 + ElbowRadius(ND_FiEntOverflow)
Y_FiOverflowHorizDrainPipeStart := FiInletChannel_Origin[1] + W_FiInletChannel + T_PlantWall - CouplingLength(ND_FiEntOverflow) + SocketDepth(ND_FiEntOverflow)
# This requires a better understanding of the role of the filter inlet box.
Y_FiOverflowHorizDrainPipeEnd := FiEntranceBox_origin[1] + L_FiEntrance/2 + ElbowRadius(ND_FiEntOverflow)
# Auxiliary Fittings
H_FiEntOverflowDrop = 0.615526 m
FiAuxFittingLayer := layer_new("FiAuxFittingPlu", green)
FiAuxRemovableLayer := layer_new("FiAuxRemovablePlu", red)
SelectFiAuxRemovables := SelectLayer("FiAuxRemovablePlu")
FiBypassCoupling :=
    if EN_DoubleTrain == 0
        CouplingSUBF([
            FiExitBox_origin[0] + CouplingLength(ND_FiBypass) - SocketDepth(ND_FiBypass);
            FiEntranceBox_origin[1] - T_ChannelWall - W_FiOverflow/2;
            Z_FiTop - S_Fitting - ConRadius(ND_FiBypass)
        ], [0; 0]*deg, ND_FiBypass, PS_Default, ["FiOverflowDistBoxCon"])
    otherwise
        CouplingSUBF([
            FiEntranceBox_origin[0] + T_ChannelWall + W_FiOverflow/2;
            FiExitBox_origin[1] + CouplingLength(ND_FiBypass) - SocketDepth(ND_FiBypass) + L_FiExit;
            Z_FiTop - S_Fitting - ConRadius(ND_FiBypass)
        ], [90; 0]*deg, ND_FiBypass, PS_Default, ["FiOverflowDistBoxCon"])
FiBypassCap :=
    if EN_DoubleTrain == 0
        CapF([
            FiExitBox_origin[0] + CouplingLength(ND_FiBypass) + CapHeight(ND_FiBypass) - CapThickness(ND_FiBypass);
            FiEntranceBox_origin[1] - T_ChannelWall - W_FiOverflow/2;
            Z_FiTop - S_Fitting - ConRadius(ND_FiBypass)
        ], [0; 0; 0]*deg, ND_FiBypass)
    otherwise
        CapF([
            FiEntranceBox_origin[0] + T_ChannelWall + W_FiOverflow/2;
            FiExitBox_origin[1] + CouplingLength(ND_FiBypass) + CapHeight(ND_FiBypass) - CapThickness(ND_FiBypass) + L_FiExit;
            Z_FiTop - S_Fitting - ConRadius(ND_FiBypass)
        ], [90; 0; 0]*deg, ND_FiBypass)
FiOverflowBoxCoupling :=
    if EN_DoubleTrain == 0
        CouplingSUBF([
            FiEntranceBox_origin[0] - L_FiEntrance/2;
            FiEntranceBox_origin[1] - T_ChannelWall - W_FiOverflow/2;
            Z_FiOverflowVertDrainPipeStart
        ], [0; 90]*deg, ND_FiEntOverflow, PS_Default, ["FiOverflowDistBoxCon"])
    otherwise
        CouplingSUBF([
            FiEntranceBox_origin[0] + T_ChannelWall + W_FiOverflow/2;
            FiEntranceBox_origin[1] + L_FiEntrance/2;
            Z_FiOverflowVertDrainPipeStart
        ], [0; 90]*deg, ND_FiEntOverflow, PS_Default, ["FiOverflowDistBoxCon"])
FiAuxFittingFrz := FreezeLayer("FiAuxFittingPlu")
FiAuxRemovableFrz := FreezeLayer("FiAuxRemovablePlu")
FiAuxFittingScript := stack(FiAuxFittingLayer, FiBypassCoupling, FiOverflowBoxCoupling, FiAuxFittingFrz, FiAuxRemovableLayer, FiBypassCap, FiAuxRemovableFrz)
# Distribution Plumbing Start
FiDistFittingLayer := layer_new("FiDistFittingPlu", green)
FiDistCoupling :=
    if EN_DoubleTrain == 0
        CouplingSUBF([
            FiExitBox_origin[0] - L_FiExit/2;
            FiEntranceBox_origin[1] - T_ChannelWall - W_FiOverflow/2;
            Z_FiExitBottom - SocketDepth(ND_DistPipe)
        ], [0; 270]*deg, ND_DistPipe, PS_Default, ["FiOverflowDistBoxCon"])
    otherwise
        CouplingSUBF([
            FiEntranceBox_origin[0] + T_ChannelWall + W_FiOverflow/2;
            FiExitBox_origin[1] + L_FiExit/2;
            Z_FiExitBottom - SocketDepth(ND_DistPipe)
        ], [0; 270]*deg, ND_DistPipe, PS_Default, ["FiOverflowDistBoxCon"])
FiDistElbow1 :=
    if EN_DoubleTrain == 0
        ElbowF([
            FiExitBox_origin[0] - L_FiExit/2;
            FiEntranceBox_origin[1] - T_ChannelWall - W_FiOverflow/2;
            Z_FiDistPipe + ElbowRadius(ND_DistPipe)
        ], [0; 0; 270]*deg, ND_DistPipe, PS_Default)
    otherwise
        ElbowF([
            FiEntranceBox_origin[0] + T_ChannelWall + W_FiOverflow/2;
            FiExitBox_origin[1] + L_FiExit/2;
            Z_FiDistPipe + ElbowRadius(ND_DistPipe)
        ], [0; -90; 270]*deg, ND_DistPipe, PS_Default)
FiDistFittingFrz := FreezeLayer("FiDistFittingPlu")
FiDistPipeLayer := layer_new("FiDistPipePlu", blue)
L_FiDistPipe1 := Z_FiExitBottom - CouplingLength(ND_DistPipe) + SocketDepth(ND_DistPipe) - (Z_FiDistPipe + ElbowRadius(ND_DistPipe))
FiDistPipe1 :=
    if EN_DoubleTrain == 0
        PipeSUBF([
            FiExitBox_origin[0] - L_FiExit/2;
            FiEntranceBox_origin[1] - T_ChannelWall - W_FiOverflow/2;
            Z_FiExitBottom - CouplingLength(ND_DistPipe) + SocketDepth(ND_DistPipe)
        ], L_FiDistPipe1, [0; 270; 0]*deg, ND_DistPipe, PS_Default, ["FiOverflowDistBoxCon"])
    otherwise
        PipeSUBF([
            FiEntranceBox_origin[0] + T_ChannelWall + W_FiOverflow/2;
            FiExitBox_origin[1] + L_FiExit/2;
            Z_FiExitBottom - CouplingLength(ND_DistPipe) + SocketDepth(ND_DistPipe)
        ], L_FiDistPipe1, [0; 270; 0]*deg, ND_DistPipe, PS_Default, ["FiOverflowDistBoxCon"])
FiDistPipeFrz := FreezeLayer("FiDistPipePlu")
FiDistStartScript := stack(FiDistFittingLayer, FiDistCoupling, FiDistElbow1, FiDistFittingFrz, FiDistPipeLayer, FiDistPipe1, FiDistPipeFrz)
# Auxiliary Pipes
FiAuxPipeLayer := layer_new("FiAuxPipePlu", blue)
FiBypassPipe1Horiz :=
    if EN_DoubleTrain == 0
        PipeF([
            FiExitBox_origin[0] + CouplingLength(ND_FiBypass) + CapHeight(ND_FiBypass) - CapThickness(ND_FiBypass);
            FiEntranceBox_origin[1] - T_ChannelWall - W_FiOverflow/2;
            Z_FiTop - S_Fitting - ConRadius(ND_FiBypass)
        ], CapHeight(ND_FiBypass) - CapThickness(ND_FiBypass) + SocketDepth(ND_FiBypass), [0; 0; 0]*deg, ND_FiBypass, PS_Default)
    otherwise
        PipeF([
            FiEntranceBox_origin[0] + T_ChannelWall + W_FiOverflow/2;
            FiExitBox_origin[1] + CouplingLength(ND_FiBypass) + CapHeight(ND_FiBypass) - CapThickness(ND_FiBypass) + L_FiExit;
            Z_FiTop - S_Fitting - ConRadius(ND_FiBypass)
        ], CapHeight(ND_FiBypass) - CapThickness(ND_FiBypass) + SocketDepth(ND_FiBypass), [90; 0; 0]*deg, ND_FiBypass, PS_Default)
FiOverflowDrainPipeVert :=
    if EN_DoubleTrain == 0
        PipeSUBF([
            FiEntranceBox_origin[0] - L_FiEntrance/2;
            FiEntranceBox_origin[1] - T_ChannelWall - W_FiOverflow/2;
            Z_FiOverflowVertDrainPipeStart
        ], Z_FiOverflowVertDrainPipeStart - Z_FiOverflowVertDrainPipeEnd, [0; 270]*deg, ND_FiEntOverflow, PS_Default, ["FiOverflowDistBoxCon"])
    otherwise
        PipeSUBF([
            FiEntranceBox_origin[0] + T_ChannelWall + W_FiOverflow/2;
            FiEntranceBox_origin[1] + L_FiEntrance/2;
            Z_FiOverflowVertDrainPipeStart
        ], Z_FiOverflowVertDrainPipeStart - Z_FiOverflowVertDrainPipeEnd, [0; 270]*deg, ND_FiEntOverflow, PS_Default, ["FiOverflowDistBoxCon"])
LayerFiAuxPipeFrz := FreezeLayer("FiAuxPipePlu")
FiAuxPipeScript := stack(FiAuxPipeLayer, FiOverflowDrainPipeVert, LayerFiAuxPipeFrz, SelectFiAuxRemovables, FiBypassPipe1Horiz, FiAuxRemovableFrz)
FiAuxPlumbingScript := stack(FiAuxFittingScript, FiDistStartScript, FiAuxPipeScript)
# Entrance and Exit Plumbing Until Filter Wall Coupling
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# This is all of the piping between filter box, entrance and exit
# In means the pipe goes IN TO THE FILTER
# Out means it comes OUT OF THE FILTER
SelectFiPipeLayer := SelectLayer("FiPipePlu")
SelectFiFittingLayer := SelectLayer("FiFittingsPlu")
# so it all fits!
AN_FiTrunkValves := 25 deg
# Inlet 0 Pipes (backwash)
Z_FiInPipe0aStart := FiEntranceBox_origin[2] - CouplingLength(ND_FiBwTrunk) + SocketDepth(ND_FiBwTrunk)
Z_FiInPipe0aEnd := Fi_origin[2] + outerradius(ND_FiBwManBranch) + ShortTeeLength(ND_FiBwTrunk)
L_FiInPipe0a := FiBwInletCoupling_origin[2] - Z_FiInPipe0aEnd = 3.20515 m
FiInPipe0a := PipeSUBF(FiBwInletCoupling_origin, L_FiInPipe0a, [0; 270]*deg, ND_FiBwTrunk, PS_Default, ["FiEntExitBoxCon"])
X_FiBwTrunkPipeEnd :=
    (Fi_origin[0] + T_FiWall + CouplingLength(ND_FiBwTrunk) - SocketDepth(ND_FiBwTrunk)) if EN_DoubleTrain == 0
    (Fi_origin[1] + L_Fi + T_FiWall + CouplingLength(ND_FiBwTrunk) - SocketDepth(ND_FiBwTrunk)) otherwise
L_FiInPipe0b :=
    (FiBwInletCoupling_origin[0] - TeeLength(ND_FiBwTrunk)/2 - X_FiBwTrunkPipeEnd) if EN_DoubleTrain == 0
    (FiBwInletCoupling_origin[1] - TeeLength(ND_FiBwTrunk)/2 - X_FiBwTrunkPipeEnd) otherwise
    = 1.95421 m
FiInPipe0b :=
    if EN_DoubleTrain == 0
        PipeF([
            FiBwInletCoupling_origin[0] - ShortTeeLength(ND_FiBwTrunk);
            FiBwInletCoupling_origin[1];
            Z_FiInPipe0aEnd - ShortTeeLength(ND_FiBwTrunk)
        ], L_FiInPipe0b, [0; 0]*deg, ND_FiBwTrunk, PS_Default)
    otherwise
        PipeF([
            FiBwInletCoupling_origin[0];
            FiBwInletCoupling_origin[1] - ShortTeeLength(ND_FiBwTrunk);
            Z_FiInPipe0aEnd - ShortTeeLength(ND_FiBwTrunk)
        ], L_FiInPipe0b, [90; 0]*deg, ND_FiBwTrunk, PS_Default)
FiIn0PipeScript := stack(FiInPipe0a, FiInPipe0b)
# Inlet 0 Fittings (backwash)
FiEntBoxCoupling0 := CouplingSUBF(FiBwInletCoupling_origin, [0; 90]*deg, ND_FiBwTrunk, PS_Default, ["FiEntExitBoxCon"])
FiInTee0a := TeeF([FiBwInletCoupling_origin[0]; FiBwInletCoupling_origin[1]; Z_FiInPipe0aEnd], [
    0;
    {
        0 if EN_DoubleTrain == 0
        90 otherwise
    };
    90
]*deg, ND_FiBwTrunk, PS_Default)
FiInReducerLarge :=
    if EN_DoubleTrain == 0
        CylinderF([
            FiBwInletCoupling_origin[0] + ShortTeeLength(ND_FiBwTrunk) + 10 cm;
            FiBwInletCoupling_origin[1];
            Z_FiInPipe0aEnd - ShortTeeLength(ND_FiBwTrunk)
        ], innerdiameter(ND_FiBwTrunk, PS_Default)/2, 10 cm, [0; 0]*deg)
    otherwise
        CylinderF([
            FiBwInletCoupling_origin[0];
            FiBwInletCoupling_origin[1] + ShortTeeLength(ND_FiBwTrunk) + 10 cm;
            Z_FiInPipe0aEnd - ShortTeeLength(ND_FiBwTrunk)
        ], innerdiameter(ND_FiBwTrunk, PS_Default)/2, 10 cm, [90; 0]*deg)
FiInReducerSmall :=
    if EN_DoubleTrain == 0
        CylinderF([
            FiBwInletCoupling_origin[0] + ShortTeeLength(ND_FiBwTrunk) + 2*10*cm;
            FiBwInletCoupling_origin[1];
            Z_FiInPipe0aEnd - ShortTeeLength(ND_FiBwTrunk)
        ], innerdiameter(3 in, PS_Default)/2, 10 cm, [0; 0]*deg)
    otherwise
        CylinderF([
            FiBwInletCoupling_origin[0];
            FiBwInletCoupling_origin[1] + ShortTeeLength(ND_FiBwTrunk) + 2*10*cm;
            Z_FiInPipe0aEnd - ShortTeeLength(ND_FiBwTrunk)
        ], innerdiameter(3 in, PS_Default)/2, 10 cm, [90; 0]*deg)
FiValveLayer := layer_new("FiValvePlu", blue3)
# The valve length and socket functions are not returning the correct numbers, so for now, I am arbitrarily setting the valve over by 60% of its length as returned by the function
FiInValve :=
    if EN_DoubleTrain == 0
        insertdwg("https://confluence.cornell.edu/download/attachments/173604905/Fi-Scaled-Gate-Valve-Threaded.dwg", [
            FiBwInletCoupling_origin[0] + ShortTeeLength(ND_FiBwTrunk) + 2*10*cm + 0.6*ValveLength(3 in);
            FiBwInletCoupling_origin[1];
            Z_FiInPipe0aEnd - ShortTeeLength(ND_FiBwTrunk)
        ], 3 in/(1.16 m), 3 in/(1.16 m), 0 deg)
    otherwise
        insertdwg("https://confluence.cornell.edu/download/attachments/173604905/Fi-Scaled-Gate-Valve-Threaded.dwg", [
            FiBwInletCoupling_origin[0];
            FiBwInletCoupling_origin[1] + ShortTeeLength(ND_FiBwTrunk) + 2*10*cm + 0.6*ValveLength(3 in);
            Z_FiInPipe0aEnd - ShortTeeLength(ND_FiBwTrunk)
        ], 3 in/(1.16 m), 3 in/(1.16 m), 90 deg)
LayerFiValveFrz := FreezeLayer("FiValvePlu")
FiIn0FittingScript := stack(FiEntBoxCoupling0, FiInTee0a, FiInReducerLarge, FiInReducerSmall, LayerFiFittingFrz, FiValveLayer, FiInValve, LayerFiValveFrz, SelectFiFittingLayer)
# Inlet 1 Pipes
Z_FiInPipe1aEnd := Fi_origin[2] + outerradius(ND_FiBwManBranch) + H_FiBottomLayer + H_FiLayer + ElbowRadius(ND_FiTrunk)
L_FiInPipe1a := FiInletCoupling1_origin[2] - Z_FiInPipe1aEnd
FiInPipe1a := PipeSUBF(FiInletCoupling1_origin, L_FiInPipe1a, [0; 270]*deg, ND_FiTrunk, PS_Default, ["FiEntExitBoxCon"])
X_FiTrunkPipeEnd :=
    (Fi_origin[0] + T_FiWall + CouplingLength(ND_FiTrunk) - SocketDepth(ND_FiTrunk)) if EN_DoubleTrain == 0
    (Fi_origin[1] + L_Fi + T_FiWall + CouplingLength(ND_FiTrunk) - SocketDepth(ND_FiTrunk)) otherwise
X_FiTrunkPipeEnd = -13.7673 m
FiInletCoupling1_origin[0] - ElbowRadius(ND_FiTrunk) = -12.0784 m
L_FiInPipe1b == FiInletCoupling1_origin[0] - ElbowRadius(ND_FiTrunk) - X_FiTrunkPipeEnd
L_FiInPipe1b := FiInletCoupling1_origin[0] - ElbowRadius(ND_FiTrunk) - X_FiTrunkPipeEnd - TeeLength(ND_FiTrunk) - 2*SocketDepth(ND_FiTrunk)
L_FiInPipe1c := 2*SocketDepth(ND_FiTrunk)
FiInPipe1b :=
    if EN_DoubleTrain == 0
        PipeF([
            FiInletCoupling1_origin[0] - ElbowRadius(ND_FiTrunk);
            FiBwInletCoupling_origin[1];
            Z_FiInPipe1aEnd - ElbowRadius(ND_FiTrunk)
        ], L_FiInPipe1b, [0; 0]*deg, ND_FiTrunk, PS_Default)
    otherwise
        PipeF([
            FiInletCoupling1_origin[0];
            FiInletCoupling1_origin[1] - ElbowRadius(ND_FiTrunk);
            Z_FiInPipe1aEnd - ElbowRadius(ND_FiTrunk)
        ], L_FiInPipe1b, [90; 0]*deg, ND_FiTrunk, PS_Default)
FiInPipe1c :=
    if EN_DoubleTrain == 0
        PipeF([
            FiInletCoupling1_origin[0] - ElbowRadius(ND_FiTrunk) - L_FiInPipe1b - TeeLength(ND_FiTrunk);
            FiBwInletCoupling_origin[1];
            Z_FiInPipe1aEnd - ElbowRadius(ND_FiTrunk)
        ], L_FiInPipe1c, [0; 0]*deg, ND_FiTrunk, PS_Default)
    otherwise
        PipeF([
            FiInletCoupling1_origin[0];
            FiInletCoupling1_origin[1] - ElbowRadius(ND_FiTrunk) - L_FiInPipe1b - TeeLength(ND_FiTrunk);
            Z_FiInPipe1aEnd - ElbowRadius(ND_FiTrunk)
        ], L_FiInPipe1c, [90; 0]*deg, ND_FiTrunk, PS_Default)
FiIn1PipeScript := stack(FiInPipe1a, FiInPipe1b, FiInPipe1c)
# Inlet 1 Fittings
FiEntBoxCoupling1 := CouplingSUBF(FiInletCoupling1_origin, [0; 90]*deg, ND_FiTrunk, PS_Default, ["FiEntExitBoxCon"])
FiInElbow1a :=
    ElbowF([FiInletCoupling1_origin[0]; FiInletCoupling1_origin[1]; Z_FiInPipe1aEnd], [0; 0; -90]*deg, ND_FiTrunk, PS_Default) if EN_DoubleTrain == 0
    ElbowF([FiInletCoupling1_origin[0]; FiInletCoupling1_origin[1]; Z_FiInPipe1aEnd], [0; -90; -90]*deg, ND_FiTrunk, PS_Default) otherwise
FiInTee1a :=
    if EN_DoubleTrain == 0
        TeeF([
            FiInletCoupling1_origin[0] - ElbowRadius(ND_FiTrunk) - L_FiInPipe1b - TeeLength(ND_FiTrunk)/2;
            FiInletCoupling1_origin[1] + ShortTeeLength(ND_FiTrunk)*cos(AN_FiTrunkValves);
            Z_FiInPipe1aEnd - ShortTeeLength(ND_FiTrunk)*sin(AN_FiTrunkValves) - ElbowRadius(ND_FiTrunk)
        ], [0 deg; 0 deg; -AN_FiTrunkValves], ND_FiTrunk, PS_Default)
    otherwise
        TeeF([
            FiInletCoupling1_origin[0] + ShortTeeLength(ND_FiTrunk)*cos(AN_FiTrunkValves);
            FiInletCoupling1_origin[1] - ElbowRadius(ND_FiTrunk) - L_FiInPipe1b - TeeLength(ND_FiTrunk)/2;
            Z_FiInPipe1aEnd - ShortTeeLength(ND_FiTrunk)*sin(AN_FiTrunkValves) - ElbowRadius(ND_FiTrunk)
        ], [90 deg; -AN_FiTrunkValves; 0 deg], ND_FiTrunk, PS_Default)
FiIn1FittingScript := stack(FiEntBoxCoupling1, FiInElbow1a, FiInTee1a)
# Inlet 1 Valve
FiSmallPipeLayer := layer_new("FiEntExitSmallPipe", blue)
FiInSmallPipe1 :=
    if EN_DoubleTrain == 0
        PipeF([
            FiInletCoupling1_origin[0] - ElbowRadius(ND_FiTrunk) - L_FiInPipe1b - TeeLength(ND_FiTrunk)/2;
            FiInletCoupling1_origin[1] + ShortTeeLength(ND_FiTrunk)*cos(AN_FiTrunkValves);
            Z_FiInPipe1aEnd - ShortTeeLength(ND_FiTrunk)*sin(AN_FiTrunkValves) - ElbowRadius(ND_FiTrunk)
        ], 2*SocketDepth(ND_FiTrunk), [-90 deg; 0 deg; 0 deg], ND_FiTrunk, PS_Default)
    otherwise
        PipeF([
            FiInletCoupling1_origin[0] + ShortTeeLength(ND_FiTrunk)*cos(AN_FiTrunkValves);
            FiInletCoupling1_origin[1] - ElbowRadius(ND_FiTrunk) - L_FiInPipe1b - TeeLength(ND_FiTrunk)/2;
            Z_FiInPipe1aEnd - ShortTeeLength(ND_FiTrunk)*sin(AN_FiTrunkValves) - ElbowRadius(ND_FiTrunk)
        ], 2*SocketDepth(ND_FiTrunk), [0 deg; 0 deg; 0 deg], ND_FiTrunk, PS_Default)
FiIn1SmallPipeRotate :=
    if EN_DoubleTrain == 0
        Rotate3DLast([
            FiInletCoupling1_origin[0] - ElbowRadius(ND_FiTrunk) - L_FiInPipe1b - TeeLength(ND_FiTrunk)/2;
            FiInletCoupling1_origin[1] + ShortTeeLength(ND_FiTrunk)*cos(AN_FiTrunkValves);
            Z_FiInPipe1aEnd - ShortTeeLength(ND_FiTrunk)*sin(AN_FiTrunkValves) - ElbowRadius(ND_FiTrunk)
        ], "x", -AN_FiTrunkValves)
    otherwise
        Rotate3DLast([
            FiInletCoupling1_origin[0] + ShortTeeLength(ND_FiTrunk)*cos(AN_FiTrunkValves);
            FiInletCoupling1_origin[1] - ElbowRadius(ND_FiTrunk) - L_FiInPipe1b - TeeLength(ND_FiTrunk)/2;
            Z_FiInPipe1aEnd - ShortTeeLength(ND_FiTrunk)*sin(AN_FiTrunkValves) - ElbowRadius(ND_FiTrunk)
        ], "y", -AN_FiTrunkValves)
FiSmallPipeFrz := FreezeLayer("FiEntExitSmallPipe")
FiEntExitValveLayer := layer_new("FiEntExitValve", black)
FiInValve1 :=
    if EN_DoubleTrain == 0
        insertdwg("https://confluence.cornell.edu/download/attachments/173604905/Sed-Scaled-Gate-Valve-Threaded.dwg", [
            FiInletCoupling1_origin[0] - ElbowRadius(ND_FiTrunk) - L_FiInPipe1b - TeeLength(ND_FiTrunk)/2;
            FiInletCoupling1_origin[1] + (ShortTeeLength(ND_FiTrunk) + 2*SocketDepth(ND_FiTrunk))*cos(AN_FiTrunkValves);
            Z_FiInPipe1aEnd - ShortTeeLength(ND_FiTrunk)*sin(AN_FiTrunkValves) - ElbowRadius(ND_FiTrunk)
        ], 2*outerradius(ND_FiTrunk)/(1.16 m), 2*outerradius(ND_FiTrunk)/(1.16 m), -90 deg)
    otherwise
        insertdwg("https://confluence.cornell.edu/download/attachments/173604905/Sed-Scaled-Gate-Valve-Threaded.dwg", [
            FiInletCoupling1_origin[0] + (ShortTeeLength(ND_FiTrunk) + 2*SocketDepth(ND_FiTrunk))*cos(AN_FiTrunkValves);
            FiInletCoupling1_origin[1] - ElbowRadius(ND_FiTrunk) - L_FiInPipe1b - TeeLength(ND_FiTrunk)/2;
            Z_FiInPipe1aEnd - ShortTeeLength(ND_FiTrunk)*sin(AN_FiTrunkValves) - ElbowRadius(ND_FiTrunk)
        ], 2*outerradius(ND_FiTrunk)/(1.16 m), 2*outerradius(ND_FiTrunk)/(1.16 m), 0 deg)
FiIn1ValveRotate :=
    if EN_DoubleTrain == 0
        Rotate3DLast([
            FiInletCoupling1_origin[0] - ElbowRadius(ND_FiTrunk) - L_FiInPipe1b - TeeLength(ND_FiTrunk)/2;
            FiInletCoupling1_origin[1] + (ShortTeeLength(ND_FiTrunk) + 2*SocketDepth(ND_FiTrunk))*cos(AN_FiTrunkValves);
            Z_FiInPipe1aEnd - ShortTeeLength(ND_FiTrunk)*sin(AN_FiTrunkValves) - ElbowRadius(ND_FiTrunk)
        ], "x", -AN_FiTrunkValves)
    otherwise
        Rotate3DLast([
            FiInletCoupling1_origin[0] + (ShortTeeLength(ND_FiTrunk) + 2*SocketDepth(ND_FiTrunk))*cos(AN_FiTrunkValves);
            FiInletCoupling1_origin[1] - ElbowRadius(ND_FiTrunk) - L_FiInPipe1b - TeeLength(ND_FiTrunk)/2;
            Z_FiInPipe1aEnd - ShortTeeLength(ND_FiTrunk)*sin(AN_FiTrunkValves) - ElbowRadius(ND_FiTrunk)
        ], "y", -AN_FiTrunkValves)
FiEntExitValveFrz := FreezeLayer("FiEntExitValve")
FiSmallPipeScript := stack(FiSmallPipeLayer, FiInSmallPipe1, FiIn1SmallPipeRotate)
FiValveScript := stack(FiEntExitValveLayer, FiInValve1, FiIn1ValveRotate)
# Inlet 2 Pipes
Z_FiInPipe2aEnd := Z_FiInPipe1aEnd + 2*H_FiLayer
Y_FiInPipe2bEnd := FiExitCoupling1_origin[1] - ConRadius(ND_FiTrunk) - T_ConcreteMin
X_FiInPipe2bEnd :=
    (FiExitCoupling1_origin[0] - ConRadius(ND_FiTrunk) - T_ConcreteMin) if EN_DoubleTrain == 0
    (FiExitCoupling1_origin[1] - ConRadius(ND_FiTrunk) - T_ConcreteMin) otherwise  # Gives 5 cm of clearance plus the elbow radius
L_FiInPipe2a := FiInletCoupling2_origin[2] - Z_FiInPipe2aEnd
L_FiInPipe2b :=
    (FiInletCoupling2_origin[0] - ElbowRadius(ND_FiTrunk) - X_FiInPipe2bEnd) if EN_DoubleTrain == 0
    (FiInletCoupling2_origin[1] - ElbowRadius(ND_FiTrunk) - Y_FiInPipe2bEnd) otherwise
FiInPipe2a := PipeSUBF(FiInletCoupling2_origin, L_FiInPipe2a, [0; 270]*deg, ND_FiTrunk, PS_Default, ["FiEntExitBoxCon"])
FiInPipe2b :=
    if EN_DoubleTrain == 0
        PipeF([
            FiInletCoupling2_origin[0] - ElbowRadius(ND_FiTrunk);
            FiInletCoupling2_origin[1];
            Z_FiInPipe2aEnd - ElbowRadius(ND_FiTrunk)
        ], L_FiInPipe2b, [0; 0]*deg, ND_FiTrunk, PS_Default)
    otherwise
        PipeF([
            FiInletCoupling2_origin[0];
            FiInletCoupling2_origin[1] - ElbowRadius(ND_FiTrunk);
            Z_FiInPipe2aEnd - ElbowRadius(ND_FiTrunk)
        ], L_FiInPipe2b, [90; 0]*deg, ND_FiTrunk, PS_Default)
Y_FiInPipe2cEnd := Fi_origin[1] + W_Fi/2 - ElbowRadius(ND_FiTrunk)
X_FiInPipe2cEnd := Fi_origin[0] - W_Fi/2 + ElbowRadius(ND_FiTrunk)
L_FiInPipe2c :=
    (Y_FiInPipe2cEnd - (FiInletCoupling2_origin[1] + ElbowRadius(ND_FiTrunk))) if EN_DoubleTrain == 0
    (X_FiInPipe2cEnd - (FiInletCoupling2_origin[0] - ElbowRadius(ND_FiTrunk))) otherwise
L_FiInPipe2d == {
    (X_FiInPipe2bEnd - 2*ElbowRadius(ND_FiTrunk) - X_FiTrunkPipeEnd) if EN_DoubleTrain == 0
    (Y_FiInPipe2bEnd - 2*ElbowRadius(ND_FiTrunk) - X_FiTrunkPipeEnd) otherwise
}
L_FiInPipe2d :=
    (X_FiInPipe2bEnd - 2*ElbowRadius(ND_FiTrunk) - X_FiTrunkPipeEnd - TeeLength(ND_FiTrunk) - 2*SocketDepth(ND_FiTrunk)) if EN_DoubleTrain == 0
    (Y_FiInPipe2bEnd - 2*ElbowRadius(ND_FiTrunk) - X_FiTrunkPipeEnd) otherwise
L_FiInPipe2e := 2*SocketDepth(ND_FiTrunk)
FiInPipe2c :=
    if EN_DoubleTrain == 0
        PipeF([
            X_FiInPipe2bEnd - ElbowRadius(ND_FiTrunk);
            FiInletCoupling2_origin[1] + ElbowRadius(ND_FiTrunk);
            Z_FiInPipe2aEnd - ElbowRadius(ND_FiTrunk)
        ], L_FiInPipe2c, [-90; 0]*deg, ND_FiTrunk, PS_Default)
    otherwise
        PipeF([
            FiInletCoupling2_origin[0] - ElbowRadius(ND_FiTrunk);
            Y_FiInPipe2bEnd - ElbowRadius(ND_FiTrunk);
            Z_FiInPipe2aEnd - ElbowRadius(ND_FiTrunk)
        ], L_FiInPipe2c, [180; 0]*deg, ND_FiTrunk, PS_Default)
FiInPipe2d :=
    if EN_DoubleTrain == 0
        PipeF([
            X_FiInPipe2bEnd - 2*ElbowRadius(ND_FiTrunk);
            Y_FiInPipe2cEnd + ElbowRadius(ND_FiTrunk);
            Z_FiInPipe2aEnd - ElbowRadius(ND_FiTrunk)
        ], L_FiInPipe2d, [0; 0]*deg, ND_FiTrunk, PS_Default)
    otherwise
        PipeF([
            X_FiInPipe2cEnd - ElbowRadius(ND_FiTrunk);
            Y_FiInPipe2bEnd - 2*ElbowRadius(ND_FiTrunk);
            Z_FiInPipe2aEnd - ElbowRadius(ND_FiTrunk)
        ], L_FiInPipe2d, [90; 0]*deg, ND_FiTrunk, PS_Default)
TeeLength(ND_FiTrunk) + 2*SocketDepth(ND_FiTrunk)
FiInPipe2e :=
    if EN_DoubleTrain == 0
        PipeF([
            X_FiInPipe2bEnd - 2*ElbowRadius(ND_FiTrunk) - L_FiInPipe2d - TeeLength(ND_FiTrunk);
            Y_FiInPipe2cEnd + ElbowRadius(ND_FiTrunk);
            Z_FiInPipe2aEnd - ElbowRadius(ND_FiTrunk)
        ], L_FiInPipe2e, [0; 0]*deg, ND_FiTrunk, PS_Default)
    otherwise
        PipeF([
            X_FiInPipe2cEnd - ElbowRadius(ND_FiTrunk);
            Y_FiInPipe2bEnd - 2*ElbowRadius(ND_FiTrunk) - L_FiInPipe2d - TeeLength(ND_FiTrunk);
            Z_FiInPipe2aEnd - ElbowRadius(ND_FiTrunk)
        ], L_FiInPipe2e, [90; 0]*deg, ND_FiTrunk, PS_Default)
FiIn2PipeScript := stack(FiInPipe2a, FiInPipe2b, FiInPipe2c, FiInPipe2d, FiInPipe2e)
# Inlet 2 Fittings
FiEntBoxCoupling2 := CouplingSUBF(FiInletCoupling2_origin, [0; 90]*deg, ND_FiTrunk, PS_Default, ["FiEntExitBoxCon"])
FiInElbow2a := ElbowF([FiInletCoupling2_origin[0]; FiInletCoupling2_origin[1]; Z_FiInPipe2aEnd], [
    0;
    {
        0 if EN_DoubleTrain == 0
        (-90) otherwise
    };
    -90
]*deg, ND_FiTrunk, PS_Default)
FiInElbow2b :=
    ElbowF([X_FiInPipe2bEnd; FiInletCoupling2_origin[1]; Z_FiInPipe2aEnd - ElbowRadius(ND_FiTrunk)], [-90; 180; 0]*deg, ND_FiTrunk, PS_Default) if EN_DoubleTrain == 0
    ElbowF([FiInletCoupling2_origin[0]; Y_FiInPipe2bEnd; Z_FiInPipe2aEnd - ElbowRadius(ND_FiTrunk)], [180; 180; 0]*deg, ND_FiTrunk, PS_Default) otherwise
FiInElbow2c :=
    if EN_DoubleTrain == 0
        ElbowF([
            X_FiInPipe2bEnd - ElbowRadius(ND_FiTrunk);
            Y_FiInPipe2cEnd;
            Z_FiInPipe2aEnd - ElbowRadius(ND_FiTrunk)
        ], [0; 0; 0]*deg, ND_FiTrunk, PS_Default)
    otherwise
        ElbowF([
            X_FiInPipe2cEnd;
            Y_FiInPipe2bEnd - ElbowRadius(ND_FiTrunk);
            Z_FiInPipe2aEnd - ElbowRadius(ND_FiTrunk)
        ], [90; 0; 0]*deg, ND_FiTrunk, PS_Default)
FiInTee2a :=
    if EN_DoubleTrain == 0
        TeeF([
            X_FiInPipe2bEnd - 2*ElbowRadius(ND_FiTrunk) - L_FiInPipe2d - TeeLength(ND_FiTrunk)/2;
            Y_FiInPipe2cEnd + ElbowRadius(ND_FiTrunk) + ShortTeeLength(ND_FiTrunk)*cos(AN_FiTrunkValves);
            Z_FiInPipe2aEnd - ElbowRadius(ND_FiTrunk) - ShortTeeLength(ND_FiTrunk)*sin(AN_FiTrunkValves)
        ], [0 deg; 0 deg; -AN_FiTrunkValves], ND_FiTrunk, PS_Default)
    otherwise
        TeeF([
            X_FiInPipe2cEnd - ElbowRadius(ND_FiTrunk) + ShortTeeLength(ND_FiTrunk)*cos(AN_FiTrunkValves);
            Y_FiInPipe2bEnd - 2*ElbowRadius(ND_FiTrunk) - L_FiInPipe2d - TeeLength(ND_FiTrunk)/2;
            Z_FiInPipe2aEnd - ElbowRadius(ND_FiTrunk) - ShortTeeLength(ND_FiTrunk)*sin(AN_FiTrunkValves)
        ], [90 deg; -AN_FiTrunkValves; 0 deg], ND_FiTrunk, PS_Default)
FiIn2FittingScript := stack(FiEntBoxCoupling2, FiInElbow2a, FiInElbow2b, FiInElbow2c, FiInTee2a)
# Inlet 2 Valve
FiInSmallPipe2 :=
    if EN_DoubleTrain == 0
        PipeF([
            X_FiInPipe2bEnd - 2*ElbowRadius(ND_FiTrunk) - L_FiInPipe2d - TeeLength(ND_FiTrunk)/2;
            Y_FiInPipe2cEnd + ElbowRadius(ND_FiTrunk) + ShortTeeLength(ND_FiTrunk)*cos(AN_FiTrunkValves);
            Z_FiInPipe2aEnd - ElbowRadius(ND_FiTrunk) - ShortTeeLength(ND_FiTrunk)*sin(AN_FiTrunkValves)
        ], 2*SocketDepth(ND_FiTrunk), [-90 deg; 0 deg; 0 deg], ND_FiTrunk, PS_Default)
    otherwise
        PipeF([
            X_FiInPipe2cEnd - ElbowRadius(ND_FiTrunk) + ShortTeeLength(ND_FiTrunk)*cos(AN_FiTrunkValves);
            Y_FiInPipe2bEnd - 2*ElbowRadius(ND_FiTrunk) - L_FiInPipe2d - TeeLength(ND_FiTrunk)/2;
            Z_FiInPipe2aEnd - ElbowRadius(ND_FiTrunk) - ShortTeeLength(ND_FiTrunk)*sin(AN_FiTrunkValves)
        ], 2*SocketDepth(ND_FiTrunk), [0 deg; 0 deg; 0 deg], ND_FiTrunk, PS_Default)
FiIn2SmallPipeRotate :=
    if EN_DoubleTrain == 0
        Rotate3DLast([
            X_FiInPipe2bEnd - 2*ElbowRadius(ND_FiTrunk) - L_FiInPipe2d - TeeLength(ND_FiTrunk)/2;
            Y_FiInPipe2cEnd + ElbowRadius(ND_FiTrunk) + ShortTeeLength(ND_FiTrunk)*cos(AN_FiTrunkValves);
            Z_FiInPipe2aEnd - ElbowRadius(ND_FiTrunk) - ShortTeeLength(ND_FiTrunk)*sin(AN_FiTrunkValves)
        ], "x", -AN_FiTrunkValves)
    otherwise
        Rotate3DLast([
            X_FiInPipe2cEnd - ElbowRadius(ND_FiTrunk) + ShortTeeLength(ND_FiTrunk)*cos(AN_FiTrunkValves);
            Y_FiInPipe2bEnd - 2*ElbowRadius(ND_FiTrunk) - L_FiInPipe2d - TeeLength(ND_FiTrunk)/2;
            Z_FiInPipe2aEnd - ElbowRadius(ND_FiTrunk) - ShortTeeLength(ND_FiTrunk)*sin(AN_FiTrunkValves)
        ], "y", -AN_FiTrunkValves)
FiInValve2 :=
    if EN_DoubleTrain == 0
        insertdwg("https://confluence.cornell.edu/download/attachments/173604905/Sed-Scaled-Gate-Valve-Threaded.dwg", [
            X_FiInPipe2bEnd - 2*ElbowRadius(ND_FiTrunk) - L_FiInPipe2d - TeeLength(ND_FiTrunk)/2;
            Y_FiInPipe2cEnd + ElbowRadius(ND_FiTrunk) + (ShortTeeLength(ND_FiTrunk) + 2*SocketDepth(ND_FiTrunk))*cos(AN_FiTrunkValves);
            Z_FiInPipe2aEnd - ElbowRadius(ND_FiTrunk) - ShortTeeLength(ND_FiTrunk)*sin(AN_FiTrunkValves)
        ], 2*outerradius(ND_FiTrunk)/(1.16 m), 2*outerradius(ND_FiTrunk)/(1.16 m), -90 deg)
    otherwise
        insertdwg("https://confluence.cornell.edu/download/attachments/173604905/Sed-Scaled-Gate-Valve-Threaded.dwg", [
            X_FiInPipe2cEnd - ElbowRadius(ND_FiTrunk) + (ShortTeeLength(ND_FiTrunk) + 2*SocketDepth(ND_FiTrunk))*cos(AN_FiTrunkValves);
            Y_FiInPipe2bEnd - 2*ElbowRadius(ND_FiTrunk) - L_FiInPipe2d - TeeLength(ND_FiTrunk)/2;
            Z_FiInPipe2aEnd - ElbowRadius(ND_FiTrunk) - ShortTeeLength(ND_FiTrunk)*sin(AN_FiTrunkValves)
        ], 2*outerradius(ND_FiTrunk)/(1.16 m), 2*outerradius(ND_FiTrunk)/(1.16 m), 0 deg)
FiIn2ValveRotate :=
    if EN_DoubleTrain == 0
        Rotate3DLast([
            X_FiInPipe2bEnd - 2*ElbowRadius(ND_FiTrunk) - L_FiInPipe2d - TeeLength(ND_FiTrunk)/2;
            Y_FiInPipe2cEnd + ElbowRadius(ND_FiTrunk) + (ShortTeeLength(ND_FiTrunk) + 2*SocketDepth(ND_FiTrunk))*cos(AN_FiTrunkValves);
            Z_FiInPipe2aEnd - ElbowRadius(ND_FiTrunk) - ShortTeeLength(ND_FiTrunk)*sin(AN_FiTrunkValves)
        ], "x", -AN_FiTrunkValves)
    otherwise
        Rotate3DLast([
            X_FiInPipe2cEnd - ElbowRadius(ND_FiTrunk) + (ShortTeeLength(ND_FiTrunk) + 2*SocketDepth(ND_FiTrunk))*cos(AN_FiTrunkValves);
            Y_FiInPipe2bEnd - 2*ElbowRadius(ND_FiTrunk) - L_FiInPipe2d - TeeLength(ND_FiTrunk)/2;
            Z_FiInPipe2aEnd - ElbowRadius(ND_FiTrunk) - ShortTeeLength(ND_FiTrunk)*sin(AN_FiTrunkValves)
        ], "y", -AN_FiTrunkValves)
FiSmallPipeScript := stack(FiSmallPipeScript, FiInSmallPipe2, FiIn2SmallPipeRotate)
FiValveScript := stack(FiValveScript, FiInValve2, FiIn2ValveRotate)
# Inlet 3 Pipes
Z_FiInPipe3aEnd := Z_FiInPipe2aEnd + 2*H_FiLayer
L_FiInPipe3a := FiInletCoupling3_origin[2] - Z_FiInPipe3aEnd
FiInPipe3a := PipeSUBF(FiInletCoupling3_origin, FiInletCoupling3_origin[2] - Z_FiInPipe3aEnd, [0; 270]*deg, ND_FiTrunk, PS_Default, ["FiEntExitBoxCon"])
X_FiInPipe3bEnd :=
    X_FiInPipe2bEnd if EN_DoubleTrain == 0
    Y_FiInPipe2bEnd otherwise
Y_FiInPipe3bEnd := Y_FiInPipe2bEnd
L_FiInPipe3b :=
    (FiInletCoupling3_origin[0] - ElbowRadius(ND_FiTrunk) - X_FiInPipe3bEnd) if EN_DoubleTrain == 0
    (FiInletCoupling3_origin[1] - ElbowRadius(ND_FiTrunk) - Y_FiInPipe3bEnd) otherwise
FiInPipe3b :=
    if EN_DoubleTrain == 0
        PipeF([
            FiInletCoupling3_origin[0] - ElbowRadius(ND_FiTrunk);
            FiInletCoupling3_origin[1];
            Z_FiInPipe3aEnd - ElbowRadius(ND_FiTrunk)
        ], L_FiInPipe3b, [0; 0]*deg, ND_FiTrunk, PS_Default)
    otherwise
        PipeF([
            FiInletCoupling3_origin[0];
            FiInletCoupling3_origin[1] - ElbowRadius(ND_FiTrunk);
            Z_FiInPipe3aEnd - ElbowRadius(ND_FiTrunk)
        ], L_FiInPipe3b, [90; 0]*deg, ND_FiTrunk, PS_Default)
X_FiInPipe3cEnd := X_FiInPipe2cEnd
Y_FiInPipe3cEnd := Y_FiInPipe2cEnd
L_FiInPipe3c :=
    (Y_FiInPipe3cEnd - (FiInletCoupling3_origin[1] + ElbowRadius(ND_FiTrunk))) if EN_DoubleTrain == 0
    (X_FiInPipe3cEnd - (FiInletCoupling3_origin[0] - ElbowRadius(ND_FiTrunk))) otherwise
L_FiInPipe3d == {
    (X_FiInPipe3bEnd - 2*ElbowRadius(ND_FiTrunk) - X_FiTrunkPipeEnd) if EN_DoubleTrain == 0
    (Y_FiInPipe3bEnd - 2*ElbowRadius(ND_FiTrunk) - X_FiTrunkPipeEnd) otherwise
}
L_FiInPipe3d :=
    (X_FiInPipe3bEnd - 2*ElbowRadius(ND_FiTrunk) - X_FiTrunkPipeEnd - TeeLength(ND_FiTrunk) - 2*SocketDepth(ND_FiTrunk)) if EN_DoubleTrain == 0
    (Y_FiInPipe3bEnd - 2*ElbowRadius(ND_FiTrunk) - X_FiTrunkPipeEnd - TeeLength(ND_FiTrunk) - 2*SocketDepth(ND_FiTrunk)) otherwise
L_FiInPipe3e := 2*SocketDepth(ND_FiTrunk)
FiInPipe3c :=
    if EN_DoubleTrain == 0
        PipeF([
            X_FiInPipe3bEnd - ElbowRadius(ND_FiTrunk);
            FiInletCoupling3_origin[1] + ElbowRadius(ND_FiTrunk);
            Z_FiInPipe3aEnd - ElbowRadius(ND_FiTrunk)
        ], L_FiInPipe3c, [-90; 0]*deg, ND_FiTrunk, PS_Default)
    otherwise
        PipeF([
            FiInletCoupling3_origin[0] - ElbowRadius(ND_FiTrunk);
            Y_FiInPipe3bEnd - ElbowRadius(ND_FiTrunk);
            Z_FiInPipe3aEnd - ElbowRadius(ND_FiTrunk)
        ], L_FiInPipe3c, [180; 0]*deg, ND_FiTrunk, PS_Default)
FiInPipe3d :=
    if EN_DoubleTrain == 0
        PipeF([
            X_FiInPipe3bEnd - 2*ElbowRadius(ND_FiTrunk);
            Y_FiInPipe3cEnd + ElbowRadius(ND_FiTrunk);
            Z_FiInPipe3aEnd - ElbowRadius(ND_FiTrunk)
        ], L_FiInPipe3d, [0; 0]*deg, ND_FiTrunk, PS_Default)
    otherwise
        PipeF([
            X_FiInPipe3cEnd - ElbowRadius(ND_FiTrunk);
            Y_FiInPipe3bEnd - 2*ElbowRadius(ND_FiTrunk);
            Z_FiInPipe3aEnd - ElbowRadius(ND_FiTrunk)
        ], L_FiInPipe3d, [90; 0]*deg, ND_FiTrunk, PS_Default)
FiInPipe3e :=
    if EN_DoubleTrain == 0
        PipeF([
            X_FiInPipe3bEnd - 2*ElbowRadius(ND_FiTrunk) - L_FiInPipe3d - TeeLength(ND_FiTrunk);
            Y_FiInPipe3cEnd + ElbowRadius(ND_FiTrunk);
            Z_FiInPipe3aEnd - ElbowRadius(ND_FiTrunk)
        ], L_FiInPipe3e, [0; 0]*deg, ND_FiTrunk, PS_Default)
    otherwise
        PipeF([
            X_FiInPipe3cEnd - ElbowRadius(ND_FiTrunk);
            Y_FiInPipe3bEnd - 2*ElbowRadius(ND_FiTrunk) - L_FiInPipe3d - TeeLength(ND_FiTrunk);
            Z_FiInPipe3aEnd - ElbowRadius(ND_FiTrunk)
        ], L_FiInPipe3e, [90; 0]*deg, ND_FiTrunk, PS_Default)
FiIn3PipeScript := stack(FiInPipe3a, FiInPipe3b, FiInPipe3c, FiInPipe3d, FiInPipe3e)
# Inlet 3 Fittings
FiEntBoxCoupling3 := CouplingSUBF(FiInletCoupling3_origin, [0; 90]*deg, ND_FiTrunk, PS_Default, ["FiEntExitBoxCon"])
FiInElbow3a := ElbowF([FiInletCoupling3_origin[0]; FiInletCoupling3_origin[1]; Z_FiInPipe3aEnd], [
    0;
    {
        0 if EN_DoubleTrain == 0
        (-90) otherwise
    };
    -90
]*deg, ND_FiTrunk, PS_Default)
FiInElbow3b :=
    ElbowF([X_FiInPipe3bEnd; FiInletCoupling3_origin[1]; Z_FiInPipe3aEnd - ElbowRadius(ND_FiTrunk)], [-90; 180; 0]*deg, ND_FiTrunk, PS_Default) if EN_DoubleTrain == 0
    ElbowF([FiInletCoupling3_origin[0]; Y_FiInPipe3bEnd; Z_FiInPipe3aEnd - ElbowRadius(ND_FiTrunk)], [180; 180; 0]*deg, ND_FiTrunk, PS_Default) otherwise
FiInElbow3c :=
    if EN_DoubleTrain == 0
        ElbowF([
            X_FiInPipe3bEnd - ElbowRadius(ND_FiTrunk);
            Y_FiInPipe3cEnd;
            Z_FiInPipe3aEnd - ElbowRadius(ND_FiTrunk)
        ], [0; 0; 0]*deg, ND_FiTrunk, PS_Default)
    otherwise
        ElbowF([
            X_FiInPipe3cEnd;
            Y_FiInPipe3bEnd - ElbowRadius(ND_FiTrunk);
            Z_FiInPipe3aEnd - ElbowRadius(ND_FiTrunk)
        ], [90; 0; 0]*deg, ND_FiTrunk, PS_Default)
FiInTee3a :=
    if EN_DoubleTrain == 0
        TeeF([
            X_FiInPipe3bEnd - 2*ElbowRadius(ND_FiTrunk) - L_FiInPipe3d - TeeLength(ND_FiTrunk)/2;
            Y_FiInPipe3cEnd + ElbowRadius(ND_FiTrunk) + ShortTeeLength(ND_FiTrunk)*cos(AN_FiTrunkValves);
            Z_FiInPipe3aEnd - ElbowRadius(ND_FiTrunk) - ShortTeeLength(ND_FiTrunk)*sin(AN_FiTrunkValves)
        ], [0 deg; 0 deg; -AN_FiTrunkValves], ND_FiTrunk, PS_Default)
    otherwise
        TeeF([
            X_FiInPipe3cEnd - ElbowRadius(ND_FiTrunk) + ShortTeeLength(ND_FiTrunk)*cos(AN_FiTrunkValves);
            Y_FiInPipe3bEnd - 2*ElbowRadius(ND_FiTrunk) - L_FiInPipe3d - TeeLength(ND_FiTrunk)/2;
            Z_FiInPipe3aEnd - ElbowRadius(ND_FiTrunk) - ShortTeeLength(ND_FiTrunk)*sin(AN_FiTrunkValves)
        ], [90 deg; -AN_FiTrunkValves; 0 deg], ND_FiTrunk, PS_Default)
FiIn3FittingScript := stack(FiEntBoxCoupling3, FiInElbow3a, FiInElbow3b, FiInElbow3c, FiInTee3a)
# Inlet 3 Valve
FiInSmallPipe3 :=
    if EN_DoubleTrain == 0
        PipeF([
            X_FiInPipe3bEnd - 2*ElbowRadius(ND_FiTrunk) - L_FiInPipe3d - TeeLength(ND_FiTrunk)/2;
            Y_FiInPipe3cEnd + ElbowRadius(ND_FiTrunk) + ShortTeeLength(ND_FiTrunk)*cos(AN_FiTrunkValves);
            Z_FiInPipe3aEnd - ElbowRadius(ND_FiTrunk) - ShortTeeLength(ND_FiTrunk)*sin(AN_FiTrunkValves)
        ], 2*SocketDepth(ND_FiTrunk), [-90 deg; 0 deg; 0 deg], ND_FiTrunk, PS_Default)
    otherwise
        PipeF([
            X_FiInPipe3cEnd - ElbowRadius(ND_FiTrunk) + ShortTeeLength(ND_FiTrunk)*cos(AN_FiTrunkValves);
            Y_FiInPipe3bEnd - 2*ElbowRadius(ND_FiTrunk) - L_FiInPipe3d - TeeLength(ND_FiTrunk)/2;
            Z_FiInPipe3aEnd - ElbowRadius(ND_FiTrunk) - ShortTeeLength(ND_FiTrunk)*sin(AN_FiTrunkValves)
        ], 2*SocketDepth(ND_FiTrunk), [0 deg; 0 deg; 0 deg], ND_FiTrunk, PS_Default)
FiIn3SmallPipeRotate :=
    if EN_DoubleTrain == 0
        Rotate3DLast([
            X_FiInPipe3bEnd - 2*ElbowRadius(ND_FiTrunk) - L_FiInPipe3d - TeeLength(ND_FiTrunk)/2;
            Y_FiInPipe3cEnd + ElbowRadius(ND_FiTrunk) + ShortTeeLength(ND_FiTrunk)*cos(AN_FiTrunkValves);
            Z_FiInPipe3aEnd - ElbowRadius(ND_FiTrunk) - ShortTeeLength(ND_FiTrunk)*sin(AN_FiTrunkValves)
        ], "x", -AN_FiTrunkValves)
    otherwise
        Rotate3DLast([
            X_FiInPipe3cEnd - ElbowRadius(ND_FiTrunk) + ShortTeeLength(ND_FiTrunk)*cos(AN_FiTrunkValves);
            Y_FiInPipe3bEnd - 2*ElbowRadius(ND_FiTrunk) - L_FiInPipe3d - TeeLength(ND_FiTrunk)/2;
            Z_FiInPipe3aEnd - ElbowRadius(ND_FiTrunk) - ShortTeeLength(ND_FiTrunk)*sin(AN_FiTrunkValves)
        ], "y", -AN_FiTrunkValves)
FiInValve3 :=
    if EN_DoubleTrain == 0
        insertdwg("https://confluence.cornell.edu/download/attachments/173604905/Sed-Scaled-Gate-Valve-Threaded.dwg", [
            X_FiInPipe2bEnd - 2*ElbowRadius(ND_FiTrunk) - L_FiInPipe2d - TeeLength(ND_FiTrunk)/2;
            Y_FiInPipe2cEnd + ElbowRadius(ND_FiTrunk) + (ShortTeeLength(ND_FiTrunk) + 2*SocketDepth(ND_FiTrunk))*cos(AN_FiTrunkValves);
            Z_FiInPipe2aEnd - ElbowRadius(ND_FiTrunk) - ShortTeeLength(ND_FiTrunk)*sin(AN_FiTrunkValves)
        ], 2*outerradius(ND_FiTrunk)/(1.16 m), 2*outerradius(ND_FiTrunk)/(1.16 m), 90 deg)
    otherwise
        insertdwg("https://confluence.cornell.edu/download/attachments/173604905/Sed-Scaled-Gate-Valve-Threaded.dwg", [
            X_FiInPipe3cEnd - ElbowRadius(ND_FiTrunk) + (ShortTeeLength(ND_FiTrunk) + 2*SocketDepth(ND_FiTrunk))*cos(AN_FiTrunkValves);
            Y_FiInPipe3bEnd - 2*ElbowRadius(ND_FiTrunk) - L_FiInPipe3d - TeeLength(ND_FiTrunk)/2;
            Z_FiInPipe3aEnd - ElbowRadius(ND_FiTrunk) - ShortTeeLength(ND_FiTrunk)*sin(AN_FiTrunkValves)
        ], 2*outerradius(ND_FiTrunk)/(1.16 m), 2*outerradius(ND_FiTrunk)/(1.16 m), 0 deg)
FiIn3ValveRotate :=
    if EN_DoubleTrain == 0
        Rotate3DLast([
            X_FiInPipe2bEnd - 2*ElbowRadius(ND_FiTrunk) - L_FiInPipe2d - TeeLength(ND_FiTrunk)/2;
            Y_FiInPipe2cEnd + ElbowRadius(ND_FiTrunk) + (ShortTeeLength(ND_FiTrunk) + 2*SocketDepth(ND_FiTrunk))*cos(AN_FiTrunkValves);
            Z_FiInPipe2aEnd - ElbowRadius(ND_FiTrunk) - ShortTeeLength(ND_FiTrunk)*sin(AN_FiTrunkValves)
        ], "x", -AN_FiTrunkValves)
    otherwise
        Rotate3DLast([
            X_FiInPipe3cEnd - ElbowRadius(ND_FiTrunk) + (ShortTeeLength(ND_FiTrunk) + 2*SocketDepth(ND_FiTrunk))*cos(AN_FiTrunkValves);
            Y_FiInPipe3bEnd - 2*ElbowRadius(ND_FiTrunk) - L_FiInPipe3d - TeeLength(ND_FiTrunk)/2;
            Z_FiInPipe3aEnd - ElbowRadius(ND_FiTrunk) - ShortTeeLength(ND_FiTrunk)*sin(AN_FiTrunkValves)
        ], "y", -AN_FiTrunkValves)
FiSmallPipeScript := stack(FiSmallPipeScript, FiInSmallPipe3, FiIn3SmallPipeRotate)
FiValveScript := stack(FiValveScript, FiInValve3, FiIn3ValveRotate)
# Outlet 0 Pipes
Z_FiOutPipe0aEnd := Z_FiInPipe1aEnd + H_FiLayer
L_FiOutPipe0a := FiExitCoupling0_origin[2] - Z_FiOutPipe0aEnd
L_FiOutPipe0b == {
    (FiExitCoupling0_origin[0] - ElbowRadius(ND_FiTrunk) - X_FiTrunkPipeEnd) if EN_DoubleTrain == 0
    (FiExitCoupling0_origin[1] - ElbowRadius(ND_FiTrunk) - X_FiTrunkPipeEnd) otherwise
}
L_FiOutPipe0b :=
    (FiExitCoupling0_origin[0] - ElbowRadius(ND_FiTrunk) - X_FiTrunkPipeEnd - TeeLength(ND_FiTrunk) - 2*SocketDepth(ND_FiTrunk)) if EN_DoubleTrain == 0
    (FiExitCoupling0_origin[1] - ElbowRadius(ND_FiTrunk) - X_FiTrunkPipeEnd - TeeLength(ND_FiTrunk) - 2*SocketDepth(ND_FiTrunk)) otherwise
L_FiOutPipe0c := 2*SocketDepth(ND_FiTrunk)
FiOutPipe0a := PipeSUBF(FiExitCoupling0_origin, FiExitCoupling0_origin[2] - Z_FiOutPipe0aEnd, [0; -90]*deg, ND_FiTrunk, PS_Default, ["FiEntExitBoxCon"])
FiOutPipe0b :=
    if EN_DoubleTrain == 0
        PipeF([
            FiExitCoupling0_origin[0] - ElbowRadius(ND_FiTrunk);
            FiExitCoupling0_origin[1];
            Z_FiOutPipe0aEnd - ElbowRadius(ND_FiTrunk)
        ], L_FiOutPipe0b, [0; 0]*deg, ND_FiTrunk, PS_Default)
    otherwise
        PipeF([
            FiExitCoupling0_origin[0];
            FiExitCoupling0_origin[1] - ElbowRadius(ND_FiTrunk);
            Z_FiOutPipe0aEnd - ElbowRadius(ND_FiTrunk)
        ], L_FiOutPipe0b, [90; 0]*deg, ND_FiTrunk, PS_Default)
FiOutPipe0c :=
    if EN_DoubleTrain == 0
        PipeF([
            FiExitCoupling0_origin[0] - ElbowRadius(ND_FiTrunk) - L_FiOutPipe0b - TeeLength(ND_FiTrunk);
            FiExitCoupling0_origin[1];
            Z_FiOutPipe0aEnd - ElbowRadius(ND_FiTrunk)
        ], L_FiOutPipe0c, [0; 0]*deg, ND_FiTrunk, PS_Default)
    otherwise
        PipeF([
            FiExitCoupling0_origin[0];
            FiExitCoupling0_origin[1] - ElbowRadius(ND_FiTrunk) - L_FiOutPipe0b - TeeLength(ND_FiTrunk);
            Z_FiOutPipe0aEnd - ElbowRadius(ND_FiTrunk)
        ], L_FiOutPipe0c, [90; 0]*deg, ND_FiTrunk, PS_Default)
FiOut0PipeScript := stack(FiOutPipe0a, FiOutPipe0b, FiOutPipe0c)
# Outlet 0 Fittings
FiExChanCoupling0 := CouplingSUBF(FiExitCoupling0_origin, [0; 90]*deg, ND_FiTrunk, PS_Default, ["FiEntExitBoxCon"])
FiOutElbow0a := ElbowF([FiExitCoupling0_origin[0]; FiExitCoupling0_origin[1]; Z_FiOutPipe0aEnd], [
    0;
    {
        0 if EN_DoubleTrain == 0
        (-90) otherwise
    };
    -90
]*deg, ND_FiTrunk, PS_Default)
FiOutTee0a :=
    if EN_DoubleTrain == 0
        TeeF([
            FiExitCoupling0_origin[0] - ElbowRadius(ND_FiTrunk) - L_FiOutPipe0b - TeeLength(ND_FiTrunk)/2;
            FiExitCoupling0_origin[1] + ShortTeeLength(ND_FiTrunk)*cos(AN_FiTrunkValves);
            Z_FiOutPipe0aEnd - ElbowRadius(ND_FiTrunk) - ShortTeeLength(ND_FiTrunk)*sin(AN_FiTrunkValves)
        ], [0 deg; 0 deg; -AN_FiTrunkValves], ND_FiTrunk, PS_Default)
    otherwise
        TeeF([
            FiExitCoupling0_origin[0] + ShortTeeLength(ND_FiTrunk)*cos(AN_FiTrunkValves);
            FiExitCoupling0_origin[1] - ElbowRadius(ND_FiTrunk) - L_FiOutPipe0b - TeeLength(ND_FiTrunk)/2;
            Z_FiOutPipe0aEnd - ElbowRadius(ND_FiTrunk) - ShortTeeLength(ND_FiTrunk)*sin(AN_FiTrunkValves)
        ], [90 deg; -AN_FiTrunkValves; 0 deg], ND_FiTrunk, PS_Default)
FiExitCoupling0_origin[1] + ShortTeeLength(ND_FiTrunk)*cos(AN_FiTrunkValves) = 5.86347 m
FiOut0FittingScript := stack(FiExChanCoupling0, FiOutElbow0a, FiOutTee0a)
Y_FiInPipe3cEnd + ElbowRadius(ND_FiTrunk) + ShortTeeLength(ND_FiTrunk)*cos(AN_FiTrunkValves) = 5.86347 m
# Outlet 0 Valve
FiOutSmallPipe0 :=
    if EN_DoubleTrain == 0
        PipeF([
            FiExitCoupling0_origin[0] - ElbowRadius(ND_FiTrunk) - L_FiOutPipe0b - TeeLength(ND_FiTrunk)/2;
            FiExitCoupling0_origin[1] + ShortTeeLength(ND_FiTrunk)*cos(AN_FiTrunkValves);
            Z_FiOutPipe0aEnd - ElbowRadius(ND_FiTrunk) - ShortTeeLength(ND_FiTrunk)*sin(AN_FiTrunkValves)
        ], 2*SocketDepth(ND_FiTrunk), [-90 deg; 0 deg; 0 deg], ND_FiTrunk, PS_Default)
    otherwise
        PipeF([
            FiExitCoupling0_origin[0] + ShortTeeLength(ND_FiTrunk)*cos(AN_FiTrunkValves);
            FiExitCoupling0_origin[1] - ElbowRadius(ND_FiTrunk) - L_FiOutPipe0b - TeeLength(ND_FiTrunk)/2;
            Z_FiOutPipe0aEnd - ElbowRadius(ND_FiTrunk) - ShortTeeLength(ND_FiTrunk)*sin(AN_FiTrunkValves)
        ], 2*SocketDepth(ND_FiTrunk), [0 deg; 0 deg; 0 deg], ND_FiTrunk, PS_Default)
FiOut0SmallPipeRotate :=
    if EN_DoubleTrain == 0
        Rotate3DLast([
            FiExitCoupling0_origin[0] - ElbowRadius(ND_FiTrunk) - L_FiOutPipe0b - TeeLength(ND_FiTrunk)/2;
            FiExitCoupling0_origin[1] + ShortTeeLength(ND_FiTrunk)*cos(AN_FiTrunkValves);
            Z_FiOutPipe0aEnd - ElbowRadius(ND_FiTrunk) - ShortTeeLength(ND_FiTrunk)*sin(AN_FiTrunkValves)
        ], "x", -AN_FiTrunkValves)
    otherwise
        Rotate3DLast([
            FiExitCoupling0_origin[0] + ShortTeeLength(ND_FiTrunk)*cos(AN_FiTrunkValves);
            FiExitCoupling0_origin[1] - ElbowRadius(ND_FiTrunk) - L_FiOutPipe0b - TeeLength(ND_FiTrunk)/2;
            Z_FiOutPipe0aEnd - ElbowRadius(ND_FiTrunk) - ShortTeeLength(ND_FiTrunk)*sin(AN_FiTrunkValves)
        ], "y", -AN_FiTrunkValves)
FiOutValve0 :=
    if EN_DoubleTrain == 0
        insertdwg("https://confluence.cornell.edu/download/attachments/173604905/Sed-Scaled-Gate-Valve-Threaded.dwg", [
            FiExitCoupling0_origin[0] - ElbowRadius(ND_FiTrunk) - L_FiOutPipe0b - TeeLength(ND_FiTrunk)/2;
            FiExitCoupling0_origin[1] + (ShortTeeLength(ND_FiTrunk) + 2*SocketDepth(ND_FiTrunk))*cos(AN_FiTrunkValves);
            Z_FiOutPipe0aEnd - ElbowRadius(ND_FiTrunk) - ShortTeeLength(ND_FiTrunk)*sin(AN_FiTrunkValves)
        ], 2*outerradius(ND_FiTrunk)/(1.16 m), 2*outerradius(ND_FiTrunk)/(1.16 m), -90 deg)
    otherwise
        insertdwg("https://confluence.cornell.edu/download/attachments/173604905/Sed-Scaled-Gate-Valve-Threaded.dwg", [
            FiExitCoupling0_origin[0] + (ShortTeeLength(ND_FiTrunk) + 2*SocketDepth(ND_FiTrunk))*cos(AN_FiTrunkValves);
            FiExitCoupling0_origin[1] - ElbowRadius(ND_FiTrunk) - L_FiOutPipe0b - TeeLength(ND_FiTrunk)/2;
            Z_FiOutPipe0aEnd - ElbowRadius(ND_FiTrunk) - ShortTeeLength(ND_FiTrunk)*sin(AN_FiTrunkValves)
        ], 2*outerradius(ND_FiTrunk)/(1.16 m), 2*outerradius(ND_FiTrunk)/(1.16 m), 0 deg)
FiOut0ValveRotate :=
    if EN_DoubleTrain == 0
        Rotate3DLast([
            FiExitCoupling0_origin[0] - ElbowRadius(ND_FiTrunk) - L_FiOutPipe0b - TeeLength(ND_FiTrunk)/2;
            FiExitCoupling0_origin[1] + (ShortTeeLength(ND_FiTrunk) + 2*SocketDepth(ND_FiTrunk))*cos(AN_FiTrunkValves);
            Z_FiOutPipe0aEnd - ElbowRadius(ND_FiTrunk) - ShortTeeLength(ND_FiTrunk)*sin(AN_FiTrunkValves)
        ], "x", -AN_FiTrunkValves)
    otherwise
        Rotate3DLast([
            FiExitCoupling0_origin[0] + (ShortTeeLength(ND_FiTrunk) + 2*SocketDepth(ND_FiTrunk))*cos(AN_FiTrunkValves);
            FiExitCoupling0_origin[1] - ElbowRadius(ND_FiTrunk) - L_FiOutPipe0b - TeeLength(ND_FiTrunk)/2;
            Z_FiOutPipe0aEnd - ElbowRadius(ND_FiTrunk) - ShortTeeLength(ND_FiTrunk)*sin(AN_FiTrunkValves)
        ], "y", -AN_FiTrunkValves)
FiSmallPipeScript := stack(FiSmallPipeScript, FiOutSmallPipe0, FiOut0SmallPipeRotate)
FiValveScript := stack(FiValveScript, FiOutValve0, FiOut0ValveRotate)
# Outlet 1 Pipes
Z_FiOutPipe1aEnd := Z_FiOutPipe0aEnd + 2*H_FiLayer
L_FiOutPipe1a := FiExitCoupling1_origin[2] - Z_FiOutPipe1aEnd
L_FiOutPipe1b == {
    (FiExitCoupling1_origin[0] - ElbowRadius(ND_FiTrunk) - X_FiTrunkPipeEnd) if EN_DoubleTrain == 0
    (FiExitCoupling1_origin[1] - ElbowRadius(ND_FiTrunk) - X_FiTrunkPipeEnd) otherwise
}
L_FiOutPipe1b :=
    (FiExitCoupling1_origin[0] - ElbowRadius(ND_FiTrunk) - X_FiTrunkPipeEnd - TeeLength(ND_FiTrunk) - 2*SocketDepth(ND_FiTrunk)) if EN_DoubleTrain == 0
    (FiExitCoupling1_origin[1] - ElbowRadius(ND_FiTrunk) - X_FiTrunkPipeEnd - TeeLength(ND_FiTrunk) - 2*SocketDepth(ND_FiTrunk)) otherwise
L_FiOutPipe1c := 2*SocketDepth(ND_FiTrunk)
FiOutPipe1a := PipeSUBF(FiExitCoupling1_origin, L_FiOutPipe1a, [0; -90]*deg, ND_FiTrunk, PS_Default, ["FiEntExitBoxCon"])
FiOutPipe1b :=
    if EN_DoubleTrain == 0
        PipeF([
            FiExitCoupling1_origin[0] - ElbowRadius(ND_FiTrunk);
            FiExitCoupling1_origin[1];
            Z_FiOutPipe1aEnd - ElbowRadius(ND_FiTrunk)
        ], L_FiOutPipe1b, [0; 0]*deg, ND_FiTrunk, PS_Default)
    otherwise
        PipeF([
            FiExitCoupling1_origin[0];
            FiExitCoupling1_origin[1] - ElbowRadius(ND_FiTrunk);
            Z_FiOutPipe1aEnd - ElbowRadius(ND_FiTrunk)
        ], L_FiOutPipe1b, [90; 0]*deg, ND_FiTrunk, PS_Default)
FiOutPipe1c :=
    if EN_DoubleTrain == 0
        PipeF([
            FiExitCoupling1_origin[0] - ElbowRadius(ND_FiTrunk) - L_FiOutPipe1b - TeeLength(ND_FiTrunk);
            FiExitCoupling1_origin[1];
            Z_FiOutPipe1aEnd - ElbowRadius(ND_FiTrunk)
        ], L_FiOutPipe1c, [0; 0]*deg, ND_FiTrunk, PS_Default)
    otherwise
        PipeF([
            FiExitCoupling1_origin[0];
            FiExitCoupling1_origin[1] - ElbowRadius(ND_FiTrunk) - L_FiOutPipe1b - TeeLength(ND_FiTrunk);
            Z_FiOutPipe1aEnd - ElbowRadius(ND_FiTrunk)
        ], L_FiOutPipe1c, [90; 0]*deg, ND_FiTrunk, PS_Default)
FiOut1PipeScript := stack(FiOutPipe1a, FiOutPipe1b, FiOutPipe1c)
# Outlet 1 Fittings
FiExChanCoupling1 := CouplingSUBF(FiExitCoupling1_origin, [0; 90]*deg, ND_FiTrunk, PS_Default, ["FiEntExitBoxCon"])
FiOutElbow1a := ElbowF([FiExitCoupling1_origin[0]; FiExitCoupling1_origin[1]; Z_FiOutPipe1aEnd], [
    0;
    {
        0 if EN_DoubleTrain == 0
        (-90) otherwise
    };
    -90
]*deg, ND_FiTrunk, PS_Default)
FiOutTee1a :=
    if EN_DoubleTrain == 0
        TeeF([
            FiExitCoupling1_origin[0] - ElbowRadius(ND_FiTrunk) - L_FiOutPipe1b - TeeLength(ND_FiTrunk)/2;
            FiExitCoupling1_origin[1] + ShortTeeLength(ND_FiTrunk)*cos(AN_FiTrunkValves);
            Z_FiOutPipe1aEnd - ElbowRadius(ND_FiTrunk) - ShortTeeLength(ND_FiTrunk)*sin(AN_FiTrunkValves)
        ], [0 deg; 0 deg; -AN_FiTrunkValves], ND_FiTrunk, PS_Default)
    otherwise
        TeeF([
            FiExitCoupling1_origin[0] + ShortTeeLength(ND_FiTrunk)*cos(AN_FiTrunkValves);
            FiExitCoupling1_origin[1] - ElbowRadius(ND_FiTrunk) - L_FiOutPipe1b - TeeLength(ND_FiTrunk)/2;
            Z_FiOutPipe1aEnd - ElbowRadius(ND_FiTrunk) - ShortTeeLength(ND_FiTrunk)*sin(AN_FiTrunkValves)
        ], [90 deg; -AN_FiTrunkValves; 0 deg], ND_FiTrunk, PS_Default)
FiOut1FittingScript := stack(FiExChanCoupling1, FiOutElbow1a, FiOutTee1a)
# Outlet 1 Valve
FiOutSmallPipe1 :=
    if EN_DoubleTrain == 0
        PipeF([
            FiExitCoupling1_origin[0] - ElbowRadius(ND_FiTrunk) - L_FiOutPipe1b - TeeLength(ND_FiTrunk)/2;
            FiExitCoupling1_origin[1] + ShortTeeLength(ND_FiTrunk)*cos(AN_FiTrunkValves);
            Z_FiOutPipe1aEnd - ElbowRadius(ND_FiTrunk) - ShortTeeLength(ND_FiTrunk)*sin(AN_FiTrunkValves)
        ], 2*SocketDepth(ND_FiTrunk), [-90 deg; 0 deg; 0 deg], ND_FiTrunk, PS_Default)
    otherwise
        PipeF([
            FiExitCoupling1_origin[0] + ShortTeeLength(ND_FiTrunk)*cos(AN_FiTrunkValves);
            FiExitCoupling1_origin[1] - ElbowRadius(ND_FiTrunk) - L_FiOutPipe1b - TeeLength(ND_FiTrunk)/2;
            Z_FiOutPipe1aEnd - ElbowRadius(ND_FiTrunk) - ShortTeeLength(ND_FiTrunk)*sin(AN_FiTrunkValves)
        ], 2*SocketDepth(ND_FiTrunk), [0 deg; 0 deg; 0 deg], ND_FiTrunk, PS_Default)
FiOut1SmallPipeRotate :=
    if EN_DoubleTrain == 0
        Rotate3DLast([
            FiExitCoupling1_origin[0] - ElbowRadius(ND_FiTrunk) - L_FiOutPipe1b - TeeLength(ND_FiTrunk)/2;
            FiExitCoupling1_origin[1] + ShortTeeLength(ND_FiTrunk)*cos(AN_FiTrunkValves);
            Z_FiOutPipe1aEnd - ElbowRadius(ND_FiTrunk) - ShortTeeLength(ND_FiTrunk)*sin(AN_FiTrunkValves)
        ], "x", -AN_FiTrunkValves)
    otherwise
        Rotate3DLast([
            FiExitCoupling1_origin[0] + ShortTeeLength(ND_FiTrunk)*cos(AN_FiTrunkValves);
            FiExitCoupling1_origin[1] - ElbowRadius(ND_FiTrunk) - L_FiOutPipe1b - TeeLength(ND_FiTrunk)/2;
            Z_FiOutPipe1aEnd - ElbowRadius(ND_FiTrunk) - ShortTeeLength(ND_FiTrunk)*sin(AN_FiTrunkValves)
        ], "y", -AN_FiTrunkValves)
FiOutValve1 :=
    if EN_DoubleTrain == 0
        insertdwg("https://confluence.cornell.edu/download/attachments/173604905/Sed-Scaled-Gate-Valve-Threaded.dwg", [
            FiExitCoupling1_origin[0] - ElbowRadius(ND_FiTrunk) - L_FiOutPipe1b - TeeLength(ND_FiTrunk)/2;
            FiExitCoupling1_origin[1] + (ShortTeeLength(ND_FiTrunk) + 2*SocketDepth(ND_FiTrunk))*cos(AN_FiTrunkValves);
            Z_FiOutPipe1aEnd - ElbowRadius(ND_FiTrunk) - ShortTeeLength(ND_FiTrunk)*sin(AN_FiTrunkValves)
        ], 2*outerradius(ND_FiTrunk)/(1.16 m), 2*outerradius(ND_FiTrunk)/(1.16 m), -90 deg)
    otherwise
        insertdwg("https://confluence.cornell.edu/download/attachments/173604905/Sed-Scaled-Gate-Valve-Threaded.dwg", [
            FiExitCoupling1_origin[0] + (ShortTeeLength(ND_FiTrunk) + 2*SocketDepth(ND_FiTrunk))*cos(AN_FiTrunkValves);
            FiExitCoupling1_origin[1] - ElbowRadius(ND_FiTrunk) - L_FiOutPipe1b - TeeLength(ND_FiTrunk)/2;
            Z_FiOutPipe1aEnd - ElbowRadius(ND_FiTrunk) - ShortTeeLength(ND_FiTrunk)*sin(AN_FiTrunkValves)
        ], 2*outerradius(ND_FiTrunk)/(1.16 m), 2*outerradius(ND_FiTrunk)/(1.16 m), 0 deg)
FiOut1ValveRotate :=
    if EN_DoubleTrain == 0
        Rotate3DLast([
            FiExitCoupling1_origin[0] - ElbowRadius(ND_FiTrunk) - L_FiOutPipe1b - TeeLength(ND_FiTrunk)/2;
            FiExitCoupling1_origin[1] + (ShortTeeLength(ND_FiTrunk) + 2*SocketDepth(ND_FiTrunk))*cos(AN_FiTrunkValves);
            Z_FiOutPipe1aEnd - ElbowRadius(ND_FiTrunk) - ShortTeeLength(ND_FiTrunk)*sin(AN_FiTrunkValves)
        ], "x", -AN_FiTrunkValves)
    otherwise
        Rotate3DLast([
            FiExitCoupling1_origin[0] + (ShortTeeLength(ND_FiTrunk) + 2*SocketDepth(ND_FiTrunk))*cos(AN_FiTrunkValves);
            FiExitCoupling1_origin[1] - ElbowRadius(ND_FiTrunk) - L_FiOutPipe1b - TeeLength(ND_FiTrunk)/2;
            Z_FiOutPipe1aEnd - ElbowRadius(ND_FiTrunk) - ShortTeeLength(ND_FiTrunk)*sin(AN_FiTrunkValves)
        ], "y", -AN_FiTrunkValves)
FiSmallPipeScript := stack(FiSmallPipeScript, FiOutSmallPipe1, FiOut1SmallPipeRotate)
FiValveScript := stack(FiValveScript, FiOutValve1, FiOut1ValveRotate)
# Outlet 2 Pipes (exit box drain)
Z_FiExitDrainOutlet := Z_FiExitBottom - H_FiExitWasteDrop
X_FiExitHorizDrainPipeStart := FiInletChannel_Origin[0] + T_PlantWall - CouplingLength(ND_FiExitWaste) + SocketDepth(ND_FiExitWaste)
X_FiExitHorizDrainPipeEnd := FiExitCoupling3_origin[0] + ElbowRadius(ND_FiExitWaste)
Y_FiExitHorizDrainPipeStart := FiInletChannel_Origin[1] + W_FiInletChannel + T_PlantWall - CouplingLength(ND_FiExitWaste) + SocketDepth(ND_FiExitWaste)
Y_FiExitHorizDrainPipeEnd := FiExitCoupling3_origin[1] + ElbowRadius(ND_FiExitWaste)
L_FiOutPipe2a := FiExitCoupling3_origin[2] - Z_FiExitDrainOutlet - ElbowRadius(ND_FiExitWaste)
FiOutPipe2a := PipeSUBF(FiExitCoupling3_origin, L_FiOutPipe2a, [0; -90]*deg, ND_FiExitWaste, PS_Default, ["FiEntExitBoxCon"])
FiOut2PipeScript := FiOutPipe2a
# Oulet 2 Fittings (exit box drain)
FiExChanCoupling2 := CouplingSUBF(FiExitCoupling3_origin, [0; 90]*deg, ND_FiExitWaste, PS_Default, ["FiEntExitBoxCon"])
FiOutElbow2a :=
    if EN_DoubleTrain == 0
        ElbowF([
            FiExitCoupling3_origin[0] + ElbowRadius(ND_FiExitWaste);
            FiExitCoupling3_origin[1];
            Z_FiExitDrainOutlet
        ], [90; 0; 270]*deg, ND_FiExitWaste, PS_Default)
    otherwise
        ElbowF([
            FiExitCoupling3_origin[0];
            FiExitCoupling3_origin[1];
            Z_FiExitDrainOutlet + ElbowRadius(ND_FiExitWaste)
        ], [0; 90; 270]*deg, ND_FiExitWaste, PS_Default)
FiOut2FittingScript := stack(FiExChanCoupling2, FiOutElbow2a)
# Outlet 3 Pipes
L_FiOut3PipeZ := FiExitCoupling2_origin[2] - (Fi_origin[2] + outerradius(ND_FiBwManBranch) + H_FiBottomLayer + ElbowRadius(ND_FiTrunk))
L_FiOut3PipeX == {
    (FiExitCoupling2_origin[0] - Fi_origin[0] - T_FiWall - CouplingLength(ND_FiTrunk) + SocketDepth(ND_FiTrunk) - ElbowRadius(ND_FiTrunk)) if EN_DoubleTrain == 0
    (FiExitCoupling0_origin[0] - FiExitCoupling2_origin[0] + 2*ElbowRadius(ND_FiTrunk)) otherwise
}  # This length has been corrected mrf222 7/9/2014
L_FiOut3PipeX :=
    (FiExitCoupling2_origin[0] - Fi_origin[0] - T_FiWall - CouplingLength(ND_FiTrunk) + SocketDepth(ND_FiTrunk) - ElbowRadius(ND_FiTrunk) - TeeLength(ND_FiTrunk) - 2*SocketDepth(ND_FiTrunk)) if EN_DoubleTrain == 0
    (FiExitCoupling0_origin[0] - FiExitCoupling2_origin[0] + 2*ElbowRadius(ND_FiTrunk) - TeeLength(ND_FiTrunk) - 2*SocketDepth(ND_FiTrunk)) otherwise
L_FiOut3PipeXb := 2*SocketDepth(ND_FiTrunk)
L_FiOut3PipeY :=
    (FiExitCoupling0_origin[1] - FiExitCoupling2_origin[1] - 2*ElbowRadius(ND_FiTrunk)) if EN_DoubleTrain == 0
    (FiExitCoupling2_origin[1] - (Fi_origin[1] + L_Fi + T_FiWall + CouplingLength(ND_FiTrunk) - SocketDepth(ND_FiTrunk)) - ElbowRadius(ND_FiTrunk)) otherwise
FiOut3PipeZ :=
    if EN_DoubleTrain == 0
        PipeSUBF([
            FiExitCoupling2_origin[0];
            FiExitCoupling2_origin[1];
            Fi_origin[2] + outerradius(ND_FiBwManBranch) + H_FiBottomLayer + ElbowRadius(ND_FiTrunk)
        ], L_FiOut3PipeZ, [0; 90]*deg, ND_FiTrunk, PS_Default, ["FiEntExitBoxCon"])
    otherwise
        PipeSUBF([
            FiExitCoupling2_origin[0];
            FiExitCoupling2_origin[1];
            Fi_origin[2] + outerradius(ND_FiBwManBranch) + H_FiBottomLayer + ElbowRadius(ND_FiTrunk)
        ], L_FiOut3PipeZ, [0; 90]*deg, ND_FiTrunk, PS_Default, ["FiEntExitBoxCon"])
FiOut3PipeX :=
    if EN_DoubleTrain == 0
        PipeF([
            FiExitCoupling2_origin[0] - ElbowRadius(ND_FiTrunk);
            FiExitCoupling0_origin[1];
            Fi_origin[2] + outerradius(ND_FiBwManBranch) + H_FiBottomLayer
        ], L_FiOut3PipeX, [0; 0]*deg, ND_FiTrunk, PS_Default)
    otherwise
        PipeF([
            FiExitCoupling2_origin[0] - ElbowRadius(ND_FiTrunk);
            FiExitCoupling2_origin[1];
            Fi_origin[2] + outerradius(ND_FiBwManBranch) + H_FiBottomLayer
        ], L_FiOut3PipeX, [180; 0]*deg, ND_FiTrunk, PS_Default)
FiOut3PipeXb :=
    if EN_DoubleTrain == 0
        PipeF([
            FiExitCoupling2_origin[0] - ElbowRadius(ND_FiTrunk) - L_FiOut3PipeX - TeeLength(ND_FiTrunk);
            FiExitCoupling0_origin[1];
            Fi_origin[2] + outerradius(ND_FiBwManBranch) + H_FiBottomLayer
        ], L_FiOut3PipeXb, [0; 0]*deg, ND_FiTrunk, PS_Default)
    otherwise
        PipeF([
            FiExitCoupling2_origin[0] - ElbowRadius(ND_FiTrunk);
            FiExitCoupling2_origin[1] - L_FiOut3PipeX - TeeLength(ND_FiTrunk);
            Fi_origin[2] + outerradius(ND_FiBwManBranch) + H_FiBottomLayer
        ], L_FiOut3PipeXb, [180; 0]*deg, ND_FiTrunk, PS_Default)
FiOut3PipeY :=
    if EN_DoubleTrain == 0
        PipeF([
            FiExitCoupling2_origin[0];
            FiExitCoupling2_origin[1] + ElbowRadius(ND_FiTrunk);
            Fi_origin[2] + outerradius(ND_FiBwManBranch) + H_FiBottomLayer
        ], L_FiOut3PipeY, [270; 0]*deg, ND_FiTrunk, PS_Default)
    otherwise
        PipeF([
            FiExitCoupling2_origin[0] - 2*ElbowRadius(ND_FiTrunk) + L_FiOut3PipeX;
            FiExitCoupling2_origin[1] - ElbowRadius(ND_FiTrunk);
            Fi_origin[2] + outerradius(ND_FiBwManBranch) + H_FiBottomLayer
        ], L_FiOut3PipeY, [90; 0]*deg, ND_FiTrunk, PS_Default)
FiOut3PipeScript := stack(FiOut3PipeZ, FiOut3PipeX, FiOut3PipeXb, FiOut3PipeY)
# Outlet 3 Fittings
FiExChanCoupling3 := CouplingSUBF(FiExitCoupling2_origin, [0; 90]*deg, ND_FiTrunk, PS_Default, ["FiEntExitBoxCon"])
FiOut3ElbowYZ := ElbowF([
    FiExitCoupling2_origin[0];
    FiExitCoupling2_origin[1] + ElbowRadius(ND_FiTrunk);
    Fi_origin[2] + outerradius(ND_FiBwManBranch) + H_FiBottomLayer
], [180; 270; 0]*deg, ND_FiTrunk, PS_Default)
FiOut3ElbowXZ := ElbowF([
    FiExitCoupling2_origin[0];
    FiExitCoupling2_origin[1];
    (Fi_origin[2] + outerradius(ND_FiBwManBranch) + H_FiBottomLayer) + ElbowRadius(ND_FiTrunk)
], [0; 0; -90]*deg, ND_FiTrunk, PS_Default)
FiOut3ElbowXY :=
    if EN_DoubleTrain == 0
        ElbowF([
            FiExitCoupling2_origin[0];
            FiExitCoupling0_origin[1] - ElbowRadius(ND_FiTrunk);
            Fi_origin[2] + outerradius(ND_FiBwManBranch) + H_FiBottomLayer
        ], [0; 0; 0]*deg, ND_FiTrunk, PS_Default)
    otherwise
        ElbowF([
            FiExitCoupling2_origin[0] - ElbowRadius(ND_FiTrunk) + L_FiOut3PipeX;
            FiExitCoupling2_origin[1];
            Fi_origin[2] + outerradius(ND_FiBwManBranch) + H_FiBottomLayer
        ], [90; 0; 0]*deg, ND_FiTrunk, PS_Default)
FiOut3Tee :=
    if EN_DoubleTrain == 0
        TeeF([
            FiExitCoupling2_origin[0] - ElbowRadius(ND_FiTrunk) - L_FiOut3PipeX - TeeLength(ND_FiTrunk)/2;
            FiExitCoupling0_origin[1] + ShortTeeLength(ND_FiTrunk)*cos(AN_FiTrunkValves);
            Fi_origin[2] + outerradius(ND_FiBwManBranch) + H_FiBottomLayer - ShortTeeLength(ND_FiTrunk)*sin(AN_FiTrunkValves)
        ], [0 deg; 0 deg; -AN_FiTrunkValves], ND_FiTrunk, PS_Default)
    otherwise
        TeeF([
            FiExitCoupling2_origin[0] - ElbowRadius(ND_FiTrunk) + ShortTeeLength(ND_FiTrunk)*cos(AN_FiTrunkValves);
            FiExitCoupling2_origin[1] - L_FiOut3PipeX - TeeLength(ND_FiTrunk)/2;
            Fi_origin[2] + outerradius(ND_FiBwManBranch) + H_FiBottomLayer - ShortTeeLength(ND_FiTrunk)*sin(AN_FiTrunkValves)
        ], [90 deg; -AN_FiTrunkValves; 0 deg], ND_FiTrunk, PS_Default)
FiOut3FittingScript :=
    stack(FiExChanCoupling3, FiOut3ElbowYZ, FiOut3ElbowXY, FiOut3Tee) if EN_DoubleTrain == 0
    stack(FiExChanCoupling3, FiOut3ElbowXZ, FiOut3ElbowXY, FiOut3Tee) otherwise
# Outlet 3 Valve
FiOutSmallPipe3 :=
    if EN_DoubleTrain == 0
        PipeF([
            FiExitCoupling2_origin[0] - ElbowRadius(ND_FiTrunk) - L_FiOut3PipeX - TeeLength(ND_FiTrunk)/2;
            FiExitCoupling0_origin[1] + ShortTeeLength(ND_FiTrunk)*cos(AN_FiTrunkValves);
            Fi_origin[2] + outerradius(ND_FiBwManBranch) + H_FiBottomLayer - ShortTeeLength(ND_FiTrunk)*sin(AN_FiTrunkValves)
        ], 2*SocketDepth(ND_FiTrunk), [-90 deg; 0 deg; 0 deg], ND_FiTrunk, PS_Default)
    otherwise
        PipeF([
            FiExitCoupling2_origin[0] - ElbowRadius(ND_FiTrunk) + ShortTeeLength(ND_FiTrunk)*cos(AN_FiTrunkValves);
            FiExitCoupling2_origin[1] - L_FiOut3PipeX - TeeLength(ND_FiTrunk)/2;
            Fi_origin[2] + outerradius(ND_FiBwManBranch) + H_FiBottomLayer - ShortTeeLength(ND_FiTrunk)*sin(AN_FiTrunkValves)
        ], 2*SocketDepth(ND_FiTrunk), [0 deg; 0 deg; 0 deg], ND_FiTrunk, PS_Default)
FiOut3SmallPipeRotate :=
    if EN_DoubleTrain == 0
        Rotate3DLast([
            FiExitCoupling2_origin[0] - ElbowRadius(ND_FiTrunk) - L_FiOut3PipeX - TeeLength(ND_FiTrunk)/2;
            FiExitCoupling0_origin[1] + ShortTeeLength(ND_FiTrunk)*cos(AN_FiTrunkValves);
            Fi_origin[2] + outerradius(ND_FiBwManBranch) + H_FiBottomLayer - ShortTeeLength(ND_FiTrunk)*sin(AN_FiTrunkValves)
        ], "x", -AN_FiTrunkValves)
    otherwise
        Rotate3DLast([
            FiExitCoupling2_origin[0] - ElbowRadius(ND_FiTrunk) + ShortTeeLength(ND_FiTrunk)*cos(AN_FiTrunkValves);
            FiExitCoupling2_origin[1] - L_FiOut3PipeX - TeeLength(ND_FiTrunk)/2;
            Fi_origin[2] + outerradius(ND_FiBwManBranch) + H_FiBottomLayer - ShortTeeLength(ND_FiTrunk)*sin(AN_FiTrunkValves)
        ], "y", -AN_FiTrunkValves)
FiOutValve3 :=
    if EN_DoubleTrain == 0
        insertdwg("https://confluence.cornell.edu/download/attachments/173604905/Sed-Scaled-Gate-Valve-Threaded.dwg", [
            FiExitCoupling2_origin[0] - ElbowRadius(ND_FiTrunk) - L_FiOut3PipeX - TeeLength(ND_FiTrunk)/2;
            FiExitCoupling0_origin[1] + (ShortTeeLength(ND_FiTrunk) + 2*SocketDepth(ND_FiTrunk))*cos(AN_FiTrunkValves);
            Fi_origin[2] + outerradius(ND_FiBwManBranch) + H_FiBottomLayer - ShortTeeLength(ND_FiTrunk)*sin(AN_FiTrunkValves)
        ], 2*outerradius(ND_FiTrunk)/(1.16 m), 2*outerradius(ND_FiTrunk)/(1.16 m), -90 deg)
    otherwise
        insertdwg("https://confluence.cornell.edu/download/attachments/173604905/Sed-Scaled-Gate-Valve-Threaded.dwg", [
            FiExitCoupling2_origin[0] - ElbowRadius(ND_FiTrunk) + (ShortTeeLength(ND_FiTrunk) + 2*SocketDepth(ND_FiTrunk))*cos(AN_FiTrunkValves);
            FiExitCoupling2_origin[1] - L_FiOut3PipeX - TeeLength(ND_FiTrunk)/2;
            Fi_origin[2] + outerradius(ND_FiBwManBranch) + H_FiBottomLayer - ShortTeeLength(ND_FiTrunk)*sin(AN_FiTrunkValves)
        ], 2*outerradius(ND_FiTrunk)/(1.16 m), 2*outerradius(ND_FiTrunk)/(1.16 m), 0 deg)
FiOut3ValveRotate :=
    if EN_DoubleTrain == 0
        Rotate3DLast([
            FiExitCoupling2_origin[0] - ElbowRadius(ND_FiTrunk) - L_FiOut3PipeX - TeeLength(ND_FiTrunk)/2;
            FiExitCoupling0_origin[1] + (ShortTeeLength(ND_FiTrunk) + 2*SocketDepth(ND_FiTrunk))*cos(AN_FiTrunkValves);
            Fi_origin[2] + outerradius(ND_FiBwManBranch) + H_FiBottomLayer - ShortTeeLength(ND_FiTrunk)*sin(AN_FiTrunkValves)
        ], "x", -AN_FiTrunkValves)
    otherwise
        Rotate3DLast([
            FiExitCoupling2_origin[0] - ElbowRadius(ND_FiTrunk) + (ShortTeeLength(ND_FiTrunk) + 2*SocketDepth(ND_FiTrunk))*cos(AN_FiTrunkValves);
            FiExitCoupling2_origin[1] - L_FiOut3PipeX - TeeLength(ND_FiTrunk)/2;
            Fi_origin[2] + outerradius(ND_FiBwManBranch) + H_FiBottomLayer - ShortTeeLength(ND_FiTrunk)*sin(AN_FiTrunkValves)
        ], "y", -AN_FiTrunkValves)
FiSmallPipeScript := stack(FiSmallPipeScript, FiOutSmallPipe3, FiOut3SmallPipeRotate, FiSmallPipeFrz)
FiValveScript := stack(FiValveScript, FiOutValve3, FiOut3ValveRotate, FiEntExitValveFrz)
# Inlet/Outlet Stubs
FiRemovableLayer := layer_new("FiRemovablePlu", red)
L_FiEntPipeStub := Z_FiEntranceStub - Z_FiEntranceBottom + SocketDepth(ND_FiTrunk)
L_FiExitPipeStub := Z_FiExitStub - Z_FiExitBottom + SocketDepth(ND_FiTrunk)
L_ExitBoxDrainStub := H_FiExit + SocketDepth(ND_FiExitWaste)
FiEnt1PipeStub := PipeF(FiInletCoupling1_origin + [0 m; 0 m; CouplingLength(ND_FiTrunk) - 2*SocketDepth(ND_FiTrunk)], L_FiEntPipeStub, [0; 90]*deg, ND_FiTrunk, PS_Default)
FiEnt2PipeStub := PipeF(FiInletCoupling2_origin + [0 m; 0 m; CouplingLength(ND_FiTrunk) - 2*SocketDepth(ND_FiTrunk)], L_FiEntPipeStub, [0; 90]*deg, ND_FiTrunk, PS_Default)
FiEnt3PipeStub := PipeF(FiInletCoupling3_origin + [0 m; 0 m; CouplingLength(ND_FiTrunk) - 2*SocketDepth(ND_FiTrunk)], L_FiEntPipeStub, [0; 90]*deg, ND_FiTrunk, PS_Default)
FiExit0PipeStub := PipeF(FiExitCoupling0_origin + [0 m; 0 m; CouplingLength(ND_FiTrunk) - 2*SocketDepth(ND_FiTrunk)], L_FiExitPipeStub, [0; 90]*deg, ND_FiTrunk, PS_Default)
FiExit1PipeStub := PipeF(FiExitCoupling1_origin + [0 m; 0 m; CouplingLength(ND_FiTrunk) - 2*SocketDepth(ND_FiTrunk)], L_FiExitPipeStub, [0; 90]*deg, ND_FiTrunk, PS_Default)
FiExit2PipeStub := PipeF(FiExitCoupling3_origin + [0 m; 0 m; CouplingLength(ND_FiExitWaste) - 2*SocketDepth(ND_FiExitWaste)], L_ExitBoxDrainStub, [0; 90]*deg, ND_FiExitWaste, PS_Default)
FiOut3PipeStub := PipeF([
    FiExitCoupling2_origin[0];
    FiExitCoupling2_origin[1];
    FiExitCoupling2_origin[2] + CouplingLength(ND_FiTrunk) - 2*SocketDepth(ND_FiTrunk)
], L_FiExitPipeStub, [0; 90]*deg, ND_FiTrunk, PS_Default)
FiRemovableFrz := FreezeLayer("FiRemovablePlu")
FiEntExitStubs := stack(FiRemovableLayer, FiEnt1PipeStub, FiEnt2PipeStub, FiEnt3PipeStub, FiExit0PipeStub, FiExit1PipeStub, FiExit2PipeStub, FiOut3PipeStub, FiRemovableFrz)
FiEntExitPipingScript := stack(SelectFiPipeLayer, FiIn0PipeScript, FiIn1PipeScript, FiIn2PipeScript, FiIn3PipeScript, FiOut0PipeScript, FiOut1PipeScript, FiOut2PipeScript, FiOut3PipeScript, LayerFiPipeFrz)
FiEntExitFittingScript := stack(SelectFiFittingLayer, FiIn0FittingScript, FiIn1FittingScript, FiIn2FittingScript, FiIn3FittingScript, FiOut0FittingScript, FiOut1FittingScript, FiOut2FittingScript, FiOut3FittingScript, LayerFiFittingFrz)
FiEntExitPlumbingScript := stack(FiEntExitPipingScript, FiEntExitFittingScript, FiEntExitStubs)
FiAuxScript := stack(FiAuxBoxScript, FiAuxPlumbingScript, FiEntExitPlumbingScript)
FiAuxValves := stack(FiSmallPipeScript, FiValveScript)
# Sand Drain
# Location changed 7/9/2014 by mrf222
H_FiSandOutlet = 1 m
# this all needs to be updated to a wye at some point
FiSandDrainPipe_Origin == Fi_origin + {
    if EN_DoubleTrain == 0
        [
            -L_Fi + ConRadius(ND_FiSandOutlet);
            W_Fi/2 - ConRadius(ND_FiBwTrunk) - S_Fitting;
            2*ConRadius(ND_FiBwManBranch)
        ]
    otherwise
        [
            -W_Fi/2 + ConRadius(ND_FiBwTrunk) + S_Fitting;
            ConRadius(ND_FiSandOutlet);
            2*ConRadius(ND_FiBwManBranch)
        ]
}
FiSandDrainPipe_Origin := Fi_origin + {
    if EN_DoubleTrain == 0
        [
            -ConRadius(ND_FiSandOutlet);
            W_Fi/2 + 2*ConRadius(ND_FiBwTrunk) + S_Fitting;
            2*ConRadius(ND_FiBwManBranch) + 5.5*H_FiLayer - H_FiSandOutlet
        ]
    otherwise
        [
            -W_Fi/2 - 2*ConRadius(ND_FiBwTrunk) - S_Fitting;
            -ConRadius(ND_FiSandOutlet);
            2*ConRadius(ND_FiBwManBranch) + 5.5*H_FiLayer - H_FiSandOutlet
        ]
}
# Currently exits between the 6th and 7th sand layers, but it probably does not expend far enough down! See design code for calculations of headloss.
L_FiSandDrainPipeVert == H_FiSandOutlet + CapHeight(ND_FiSandOutlet) + B_FiManifoldBranch + T_FiWall + 2*ValveLength(ND_FiSandOutlet)
L_FiSandDrainPipeVert := H_FiSandOutlet - TeeLength(ND_FiSandOutlet)/2
FiSandDrainTee_Origin := FiSandDrainPipe_Origin + {
    [ShortTeeLength(ND_FiSandOutlet); 0 m; TeeLength(ND_FiSandOutlet)/2 + L_FiSandDrainPipeVert] if EN_DoubleTrain == 0
    otherwise
        [
            -W_Fi/2 - ConRadius(ND_FiBwTrunk) - S_Fitting;
            0 m;
            TeeLength(ND_FiSandOutlet)/2 + L_FiSandDrainPipeVert
        ]
}
L_FiSandDrainHorizPipe := T_FiWall + 2*SocketDepth(ND_FiSandOutlet)
FiSandDrainHorizPipe_Origin := FiSandDrainTee_Origin
L_FiSandDrainShortPipe := 2*SocketDepth(ND_FiSandOutlet)
FiSandDrainShortPipe1_Origin := FiSandDrainPipe_Origin + [0 m; 0 m; L_FiSandDrainPipeVert + TeeLength(ND_FiSandOutlet)]
FiSandDrainElbow_Origin := FiSandDrainHorizPipe_Origin + {
    [L_FiSandDrainHorizPipe; 0 m; 0 m] if EN_DoubleTrain == 0
    [0 m; L_FiSandDrainHorizPipe; 0 m] otherwise
}
FiSandDrainShortPipe2_Origin := FiSandDrainElbow_Origin + {
    [ElbowRadius(ND_FiSandOutlet); 0 m; -ElbowRadius(ND_FiSandOutlet)] if EN_DoubleTrain == 0
    [0 m; ElbowRadius(ND_FiSandOutlet); -ElbowRadius(ND_FiSandOutlet)] otherwise
}
FiSandDrainPipeLayer := layer_new("FiSandDrainPlu", blue)
DrawFiSandDrainPipeVert := PipeF(FiSandDrainPipe_Origin, L_FiSandDrainPipeVert, [0; 90]*deg, ND_FiSandOutlet, PS_Default)
DrawFiSandDrainPipeShort1 := PipeF(FiSandDrainShortPipe1_Origin, L_FiSandDrainShortPipe, [0; 90]*deg, ND_FiSandOutlet, PS_Default)
DrawFiSandDrainHorizPipe :=
    PipeSUBF(FiSandDrainHorizPipe_Origin, L_FiSandDrainHorizPipe, [180; 0; 0]*deg, ND_FiSandOutlet, PS_Default, ["FiTankCon"]) if EN_DoubleTrain == 0
    PipeSUBF(FiSandDrainHorizPipe_Origin, L_FiSandDrainHorizPipe, [90; -90; 0]*deg, ND_FiSandOutlet, PS_Default, ["FiTankCon"]) otherwise
# unsure of angle for the double train case!
DrawFiSandDrainPipeShort2 := PipeF(FiSandDrainShortPipe2_Origin, L_FiSandDrainShortPipe, [0; -90]*deg, ND_FiSandOutlet, PS_Default)
# Not including this anymore...
DrawFiOutletCap == CapF([0; 0; L_FiSandDrainPipeVert] + FiSandDrainPipe_Origin, [0; 270]*deg, ND_FiSandOutlet)  # Are we keeping this? Unsure.
DrawFiOutletCap := CapF([
    0;
    0;
    L_FiSandDrainPipeVert + TeeLength(ND_FiSandOutlet) + SocketDepth(ND_FiSandOutlet) + CapHeight(ND_FiSandOutlet)
] + FiSandDrainPipe_Origin, [0; 270]*deg, ND_FiSandOutlet)
DrawFiSandOutletValve :=
    if EN_DoubleTrain == 0
        insertdwg("https://confluence.cornell.edu/download/attachments/173604905/Fi-Scaled-Gate-Valve-Threaded.dwg", [
            FiSandDrainPipe_Origin[0] - (B_FiManifoldBranch + T_FiWall + 2*ValveLength(ND_FiSandOutlet)) - (ValveLength(ND_FiSandOutlet) - ValveSocket(ND_FiSandOutlet))/sqrt(2);
            FiSandDrainPipe_Origin[1];
            Fi_origin[2] + H_FiSandOutlet - (ValveLength(ND_FiSandOutlet) + ValveSocket(ND_FiSandOutlet))/sqrt(2) + 2*outerradius(ND_FiManBranch) - (ValveLength(ND_FiSandOutlet) - ValveSocket(ND_FiSandOutlet))/sqrt(2)
        ], 2*outerradius(ND_FiSandOutlet)/(1.16 m), 2*outerradius(ND_FiSandOutlet)/(1.16 m), 0 deg)
    otherwise
        insertdwg("https://confluence.cornell.edu/download/attachments/173604905/Fi-Scaled-Gate-Valve-Threaded.dwg", [
            FiSandDrainPipe_Origin[0];
            FiSandDrainPipe_Origin[1] - (B_FiManifoldBranch + T_FiWall + 2*ValveLength(ND_FiSandOutlet)) - (ValveLength(ND_FiSandOutlet) - ValveSocket(ND_FiSandOutlet))/sqrt(2);
            Fi_origin[2] + H_FiSandOutlet - (ValveLength(ND_FiSandOutlet) + ValveSocket(ND_FiSandOutlet))/sqrt(2) + 2*outerradius(ND_FiManBranch) - (ValveLength(ND_FiSandOutlet) - ValveSocket(ND_FiSandOutlet))/sqrt(2)
        ], 2*outerradius(ND_FiSandOutlet)/(1.16 m), 2*outerradius(ND_FiSandOutlet)/(1.16 m), 0 deg)
DrawFiSandOutletValve := insertdwg("https://confluence.cornell.edu/download/attachments/173604905/Fi-Scaled-Gate-Valve-Threaded.dwg", FiSandDrainShortPipe2_Origin - [0; 0; L_FiSandDrainShortPipe], 2*outerradius(ND_FiSandOutlet)/(1.16 m), 2*outerradius(ND_FiSandOutlet)/(1.16 m), 180 deg)
FiSandOutletValveRotate := Rotate3DLast(FiSandDrainShortPipe2_Origin - [0; 0; L_FiSandDrainShortPipe], "x", -90)
RotateFiSandOutletValve1 :=
    if EN_DoubleTrain == 0
        Rotate3DLast([
            FiSandDrainPipe_Origin[0] - (B_FiManifoldBranch + T_FiWall + 2*ValveLength(ND_FiSandOutlet)) - (ValveLength(ND_FiSandOutlet) - ValveSocket(ND_FiSandOutlet))/sqrt(2);
            FiSandDrainPipe_Origin[1];
            Fi_origin[2] + H_FiSandOutlet - (ValveLength(ND_FiSandOutlet) + ValveSocket(ND_FiSandOutlet))/sqrt(2) + 2*outerradius(ND_FiManBranch) - (ValveLength(ND_FiSandOutlet) - ValveSocket(ND_FiSandOutlet))/sqrt(2)
        ], "z", 180 deg)
    otherwise
        Rotate3DLast([
            FiSandDrainPipe_Origin[0];
            FiSandDrainPipe_Origin[1] - (B_FiManifoldBranch + T_FiWall + 2*ValveLength(ND_FiSandOutlet)) - (ValveLength(ND_FiSandOutlet) - ValveSocket(ND_FiSandOutlet))/sqrt(2);
            Fi_origin[2] + H_FiSandOutlet - (ValveLength(ND_FiSandOutlet) + ValveSocket(ND_FiSandOutlet))/sqrt(2) + 2*outerradius(ND_FiManBranch) - (ValveLength(ND_FiSandOutlet) - ValveSocket(ND_FiSandOutlet))/sqrt(2)
        ], "z", -45 deg)
RotateFiSandOutletValve2 :=
    if EN_DoubleTrain == 0
        Rotate3DLast([
            FiSandDrainPipe_Origin[0] - (B_FiManifoldBranch + T_FiWall + 2*ValveLength(ND_FiSandOutlet)) - (ValveLength(ND_FiSandOutlet) - ValveSocket(ND_FiSandOutlet))/sqrt(2);
            FiSandDrainPipe_Origin[1];
            Fi_origin[2] + H_FiSandOutlet - (ValveLength(ND_FiSandOutlet) + ValveSocket(ND_FiSandOutlet))/sqrt(2) + 2*outerradius(ND_FiManBranch) - (ValveLength(ND_FiSandOutlet) - ValveSocket(ND_FiSandOutlet))/sqrt(2)
        ], "y", -45 deg)
    otherwise
        Rotate3DLast([
            FiSandDrainPipe_Origin[0];
            FiSandDrainPipe_Origin[1] - (B_FiManifoldBranch + T_FiWall + 2*ValveLength(ND_FiSandOutlet)) - (ValveLength(ND_FiSandOutlet) - ValveSocket(ND_FiSandOutlet))/sqrt(2);
            Fi_origin[2] + H_FiSandOutlet - (ValveLength(ND_FiSandOutlet) + ValveSocket(ND_FiSandOutlet))/sqrt(2) + 2*outerradius(ND_FiManBranch) - (ValveLength(ND_FiSandOutlet) - ValveSocket(ND_FiSandOutlet))/sqrt(2)
        ], "y", 90 deg)
FiSandDrainOutletValveLayer := layer_new("FiSandDrainOutlerValve", black)
FiSandDrainOutletValveFreeze := FreezeLayer("FiSandDrainOutlerValve")
FiSandDrainOutletValveScript := stack(FiSandDrainOutletValveLayer, DrawFiSandOutletValve, FiSandOutletValveRotate, FiSandDrainOutletValveFreeze)
FreezeFiSandDrain := FreezeLayer("FiSandDrainPlu")
FiSandDrainFittingLayer := layer_new("FiSandDrainFittings", green)
DrawFiSandDrainTee :=
    TeeSUBF(FiSandDrainTee_Origin, [-90; 0; 90]*deg, ND_FiSandOutlet, PS_Default, ["FiTankCon"]) if EN_DoubleTrain == 0
    TeeSUBF(FiSandDrainTee_Origin, [0; -90; 90]*deg, ND_FiSandOutlet, PS_Default, ["FiTankCon"]) otherwise
DrawFiSandDrainElbow :=
    ElbowSUBF(FiSandDrainElbow_Origin, [-90; 0; -90]*deg, ND_FiSandOutlet, PS_Default, ["FiTankCon"]) if EN_DoubleTrain == 0
    ElbowSUBF(FiSandDrainElbow_Origin, [180; 90; -90]*deg, ND_FiSandOutlet, PS_Default, ["FiTankCon"]) otherwise  # unsure of angle in double train case!
FreezeFiSandDrainFittings := FreezeLayer("FiSandDrainFittings")
FiSandDrainFittingScript := stack(FiSandDrainFittingLayer, DrawFiSandDrainTee, DrawFiSandDrainElbow, FreezeFiSandDrainFittings)
FiSandDrainScript == stack(FiSandDrainPipeLayer, DrawFiSandDrainPipeVert, DrawFiSandDrainPipeAngled, DrawFiOutletCap, DrawFiSandOutletValve, RotateFiSandOutletValve1, RotateFiSandOutletValve2, FreezeFiSandDrain)
FiSandDrainScript := stack(FiSandDrainPipeLayer, DrawFiSandDrainPipeVert, DrawFiSandDrainPipeShort1, DrawFiSandDrainHorizPipe, DrawFiSandDrainPipeShort2, DrawFiOutletCap, FreezeFiSandDrain, FiSandDrainFittingScript, FiSandDrainOutletValveScript)
# Backwash Siphon
L_FiSiphonPipeBottom :=
    (W_PlantDC/2 + FiInletChannel_Origin[0] - (Fi_origin[0] + T_FiWall + SocketDepth(ND_FiSiphon) + ShortTeeLength(ND_FiSiphon) + ElbowRadius(ND_FiSiphon)) - ElbowRadius(ND_FiSiphon)) if EN_DoubleTrain == 0
    (W_PlantDC/2 + FiInletChannel_Origin[1] + W_FiInletChannel - (Fi_origin[1] + L_Fi + T_FiWall + SocketDepth(ND_FiSiphon) + ShortTeeLength(ND_FiSiphon) + ElbowRadius(ND_FiSiphon)) - ElbowRadius(ND_FiSiphon)) otherwise
    = 2.86289 m
X_FiSiphonPipe1End := Fi_origin[0] + T_FiWall - CouplingLength(ND_FiSiphon) + SocketDepth(ND_FiSiphon) - max((T_FiWall - CouplingLength(ND_FiSiphon)) + 2*SocketDepth(ND_FiSiphon), 2*SocketDepth(ND_FiSiphon))
X_FiSiphonManifoldStart := X_FiSiphonPipe1End - ElbowRadius(ND_FiSiphon) - ShortTeeLength(ND_FiSiphon)
X_FiSiphonManifoldEnd := Fi_origin[0] - L_Fi
Y_FiSiphonPipe1End := Fi_origin[1] + L_Fi + T_FiWall - CouplingLength(ND_FiSiphon) + SocketDepth(ND_FiSiphon) - max((T_FiWall - CouplingLength(ND_FiSiphon)) + 2*SocketDepth(ND_FiSiphon), 2*SocketDepth(ND_FiSiphon))
Y_FiSiphonManifoldStart := Y_FiSiphonPipe1End - ElbowRadius(ND_FiSiphon) - ShortTeeLength(ND_FiSiphon)
Y_FiSiphonManifoldEnd := Fi_origin[1]
# Siphon Fittings Other than Drain Channel Coupling
FiSiphonCoupling :=
    if EN_DoubleTrain == 0
        CouplingSUBF([
            Fi_origin[0] + T_FiWall - SocketDepth(ND_FiSiphon);
            Fi_origin[1] + S_Fitting + ConRadius(ND_FiSiphon);
            Z_FiSiphonCoupling
        ], [0; 0]*deg, ND_FiSiphon, PS_Default, ["FiTankCon"])
    otherwise
        CouplingSUBF([
            Fi_origin[0] - S_Fitting - ConRadius(ND_FiSiphon);
            Fi_origin[1] + L_Fi + T_FiWall - SocketDepth(ND_FiSiphon);
            Z_FiSiphonCoupling
        ], [90; 0]*deg, ND_FiSiphon, PS_Default, ["FiTankCon"])
FiSiphonTee :=
    if EN_DoubleTrain == 0
        TeeF([
            Fi_origin[0] - L_Fi/2;
            Fi_origin[1] + S_Fitting + ConRadius(ND_FiSiphon);
            Z_FiSiphonInlet - outerradius(ND_FiSiphon) + ShortTeeLength(ND_FiSiphon)
        ], [0; 0; 90]*deg, ND_FiSiphon, PS_Default)
    otherwise
        TeeF([
            Fi_origin[0] - S_Fitting - ConRadius(ND_FiSiphon);
            Fi_origin[1] + L_Fi/2;
            Z_FiSiphonInlet - outerradius(ND_FiSiphon) + ShortTeeLength(ND_FiSiphon)
        ], [0; 90; 90]*deg, ND_FiSiphon, PS_Default)
FiSiphonElbow1 :=
    if EN_DoubleTrain == 0
        ElbowF([
            Fi_origin[0] - L_Fi/2 + ElbowRadius(ND_FiSiphon);
            Fi_origin[1] + S_Fitting + ConRadius(ND_FiSiphon);
            Z_FiSiphonCoupling
        ], [90; 0; 90]*deg, ND_FiSiphon, PS_Default)
    otherwise
        ElbowF([
            Fi_origin[0] - S_Fitting - ConRadius(ND_FiSiphon);
            Fi_origin[1] + L_Fi/2 + ElbowRadius(ND_FiSiphon);
            Z_FiSiphonCoupling
        ], [90; 90; 90]*deg, ND_FiSiphon, PS_Default)
FiSiphonManifoldCap1 :=
    if EN_DoubleTrain == 0
        CapF([
            X_FiSiphonManifoldEnd + ConRadius(ND_FiSiphon) - outerradius(ND_FiSiphon);
            Fi_origin[1] + S_Fitting + ConRadius(ND_FiSiphon);
            Z_FiSiphonInlet - outerradius(ND_FiSiphon)
        ], [180; 0]*deg, ND_FiSiphon)
    otherwise
        CapF([
            Fi_origin[0] - S_Fitting - ConRadius(ND_FiSiphon);
            Y_FiSiphonManifoldEnd + ConRadius(ND_FiSiphon) - outerradius(ND_FiSiphon);
            Z_FiSiphonInlet - outerradius(ND_FiSiphon)
        ], [-90; 0]*deg, ND_FiSiphon)
FiSiphonManifoldCap2 :=
    if EN_DoubleTrain == 0
        CapF([
            Fi_origin[0] - ConRadius(ND_FiSiphon) + outerradius(ND_FiSiphon);
            Fi_origin[1] + S_Fitting + ConRadius(ND_FiSiphon);
            Z_FiSiphonInlet - outerradius(ND_FiSiphon)
        ], [0; 0]*deg, ND_FiSiphon)
    otherwise
        CapF([
            Fi_origin[0] - S_Fitting - ConRadius(ND_FiSiphon);
            Fi_origin[1] + L_Fi - ConRadius(ND_FiSiphon) + outerradius(ND_FiSiphon);
            Z_FiSiphonInlet - outerradius(ND_FiSiphon)
        ], [90; 0]*deg, ND_FiSiphon)
FiSiphonTee2_Origin :=
    if EN_DoubleTrain == 0
        [
            Fi_origin[0] + T_FiWall + SocketDepth(ND_FiSiphon);
            Fi_origin[1] + S_Fitting + ConRadius(ND_FiSiphon);
            Z_FiSiphonCoupling
        ]
    otherwise
        [
            Fi_origin[0] - S_Fitting - ConRadius(ND_FiSiphon);
            Fi_origin[1] + L_Fi + T_FiWall + SocketDepth(ND_FiSiphon);
            Z_FiSiphonCoupling
        ]
FiSiphonTee2 := TeeF(FiSiphonTee2_Origin, [
    90;
    {
        0 if EN_DoubleTrain == 0
        90 otherwise
    };
    90
]*deg, ND_FiSiphon, PS_Default)
FiSiphonElbow0 :=
    if EN_DoubleTrain == 0
        ElbowF([
            Fi_origin[0] + T_FiWall + SocketDepth(ND_FiSiphon) + ShortTeeLength(ND_FiSiphon) + ElbowRadius(ND_FiSiphon);
            Fi_origin[1] + S_Fitting + ConRadius(ND_FiSiphon);
            Fi_origin[2]
        ], [90; 0; 270]*deg, ND_FiSiphon, PS_Default)
    otherwise
        ElbowF([
            Fi_origin[0] - S_Fitting - ConRadius(ND_FiSiphon);
            Fi_origin[1] + T_FiWall + L_Fi + SocketDepth(ND_FiSiphon) + ShortTeeLength(ND_FiSiphon) + ElbowRadius(ND_FiSiphon);
            Fi_origin[2]
        ], [90; -90; 270]*deg, ND_FiSiphon, PS_Default)
FiSiphonElbow01 :=
    if EN_DoubleTrain == 0
        ElbowF([
            Fi_origin[0] + T_FiWall + SocketDepth(ND_FiSiphon) + ShortTeeLength(ND_FiSiphon) + ElbowRadius(ND_FiSiphon) + L_FiSiphonPipeBottom;
            Fi_origin[1] + S_Fitting + ConRadius(ND_FiSiphon);
            Fi_origin[2]
        ], [270; 0; 90]*deg, ND_FiSiphon, PS_Default)
    otherwise
        ElbowF([
            Fi_origin[0] - S_Fitting - ConRadius(ND_FiSiphon);
            Fi_origin[1] + L_Fi + T_FiWall + SocketDepth(ND_FiSiphon) + ShortTeeLength(ND_FiSiphon) + ElbowRadius(ND_FiSiphon) + L_FiSiphonPipeBottom;
            Fi_origin[2]
        ], [270; 90; 90]*deg, ND_FiSiphon, PS_Default)
FiSiphonReducerCyl1 := CylinderF({
    if EN_DoubleTrain == 0
        [
            Fi_origin[0] + T_FiWall + SocketDepth(ND_FiSiphon) + ShortTeeLength(ND_FiSiphon);
            Fi_origin[1] + S_Fitting + ConRadius(ND_FiSiphon);
            Z_FiSiphonCoupling + ShortTeeLength(ND_FiSiphon)
        ]
    otherwise
        [
            Fi_origin[0] - S_Fitting - ConRadius(ND_FiSiphon);
            Fi_origin[1] + L_Fi + T_FiWall + SocketDepth(ND_FiSiphon) + ShortTeeLength(ND_FiSiphon);
            Z_FiSiphonCoupling + ShortTeeLength(ND_FiSiphon)
        ]
}, outerradius(ND_FiSiphon), SocketDepth(ND_FiSiphon), [0; 90]*deg)
FiSiphonReducerCyl2 := CylinderF({
    if EN_DoubleTrain == 0
        [
            Fi_origin[0] + T_FiWall + SocketDepth(ND_FiSiphon) + ShortTeeLength(ND_FiSiphon);
            Fi_origin[1] + S_Fitting + ConRadius(ND_FiSiphon);
            Z_FiSiphonCoupling + ShortTeeLength(ND_FiSiphon)
        ]
    otherwise
        [
            Fi_origin[0] - S_Fitting - ConRadius(ND_FiSiphon);
            Fi_origin[1] + L_Fi + T_FiWall + SocketDepth(ND_FiSiphon) + ShortTeeLength(ND_FiSiphon);
            Z_FiSiphonCoupling + ShortTeeLength(ND_FiSiphon)
        ]
}, outerradius(ND_FiSiphonAirValve), SocketDepth(ND_FiSiphon), [0; 90]*deg)
FiSiphonReducerSubtract := SubtractF(["FiFittingsPlu"], "DeleteMe")
SelectFiValveLayer := SelectLayer("FiValvePlu")
# The air release valve needs to be brought up to the plant walkway!
reducerF(OriginPoint, AngleVector, ND_in, ND_out, ReducerLength, EN)
# Need to find the middle ground for the first reducer section!
FiSiphonReducerConnect :=
    1 if ND_FiSiphon > 4 in
    0 otherwise
ND_FiSiphonReducerConnect := 4 in
L_FiSiphonAirReleaseReducer0 :=
    ReducerLength(ND_FiSiphon, ND_FiSiphonReducerConnect) if FiSiphonReducerConnect == 1
    0 otherwise  # Problem if this is ever 0, just with syntax.
ND_FiAirReleaseMid := 2 in
L_FiSiphonAirReleaseReducer1 :=
    ReducerLength(ND_FiSiphonReducerConnect, ND_FiAirReleaseMid) if FiSiphonReducerConnect == 1
    0 otherwise
FiSiphonAirReleaseReducer0_Origin := FiSiphonTee2_Origin + {
    [ShortTeeLength(ND_FiSiphon); 0 m; TeeLength(ND_FiSiphon)/2 + 2*SocketDepth(ND_FiSiphon)] if EN_DoubleTrain == 0
    [0 m; ShortTeeLength(ND_FiSiphon); TeeLength(ND_FiSiphon)/2 + 2*SocketDepth(ND_FiSiphon)] otherwise
}
FiSiphonAirReleaseConnectorPipe_Origin := FiSiphonAirReleaseReducer0_Origin + [0 m; 0 m; -2*SocketDepth(ND_FiSiphon)]
FiSiphonAirReleaseReducerPipe_Origin := FiSiphonAirReleaseReducer0_Origin + [0 m; 0 m; L_FiSiphonAirReleaseReducer0]
L_FiSiphonAirReleaseReducerPipe := 2*SocketDepth(ND_FiSiphonReducerConnect)
L_FiSiphonAirReleaseShortPipe := 2*SocketDepth(ND_FiAirReleaseMid)
FiSiphonAirReleaseReducer1_Origin :=
    (FiSiphonAirReleaseReducer0_Origin + [0 m; 0 m; L_FiSiphonAirReleaseReducer0 + 2*SocketDepth(ND_FiSiphonReducerConnect)]) if FiSiphonReducerConnect == 1
    FiSiphonAirReleaseReducer0_Origin otherwise
FiSiphonAirReleaseReducer1_Origin = [-13.5831; 5.07934; 1.42515] m
FiSiphonAirReleaseShortPipe_Origin := FiSiphonAirReleaseReducer1_Origin + [0 m; 0 m; ReducerLength(ND_FiSiphonReducerConnect, ND_FiAirReleaseMid)]
FiSiphonAirReleaseElbow1_Origin := FiSiphonAirReleaseReducer1_Origin + {
    if EN_DoubleTrain == 0
        [
            -ElbowRadius(ND_FiAirReleaseMid);
            0 m;
            L_FiSiphonAirReleaseReducer1 + ElbowRadius(ND_FiAirReleaseMid) + 2*SocketDepth(ND_FiAirReleaseMid)
        ]
    otherwise
        [
            0 m;
            -ElbowRadius(ND_FiAirReleaseMid);
            L_FiSiphonAirReleaseReducer1 + ElbowRadius(ND_FiAirReleaseMid) + 2*SocketDepth(ND_FiAirReleaseMid)
        ]
}
FiSiphonAirReleaseHorizPipe_Origin := FiSiphonAirReleaseElbow1_Origin
FiSiphonAirReleaseElbow2_Origin :=
    if EN_DoubleTrain == 0
        [
            Fi_origin[0] + T_FiWall + ConRadius(ND_FiAirReleaseMid);
            FiSiphonAirReleaseElbow1_Origin[1];
            FiSiphonAirReleaseElbow1_Origin[2] + ElbowRadius(ND_FiAirReleaseMid)
        ]
    otherwise
        [
            FiSiphonAirReleaseElbow1_Origin[0];
            Fi_origin[1] + T_FiWall + ConRadius(ND_FiAirReleaseMid);
            FiSiphonAirReleaseElbow1_Origin[2] + ElbowRadius(ND_FiAirReleaseMid)
        ]
L_FiSiphonAirReleaseHorizPipe := FiSiphonAirReleaseElbow1_Origin[0] - FiSiphonAirReleaseElbow2_Origin[0] - ElbowRadius(ND_FiAirReleaseMid)
FiSiphonAirReleaseVertPipe_Origin := FiSiphonAirReleaseElbow2_Origin
L_Arb := T_PlantWall
FiSiphonAirReleaseReducer2_Origin := [FiSiphonAirReleaseElbow2_Origin[0]; FiSiphonAirReleaseElbow2_Origin[1]; Z_Walkway + L_Arb]
L_FiSiphonAirReleaseVertPipe := FiSiphonAirReleaseReducer2_Origin[2] - FiSiphonAirReleaseElbow2_Origin[2]
FiReducerLayer0 := layer_new("FiRed0", yellow)
DrawFiSiphonAirReleaseReducer0 := reducerF(FiSiphonAirReleaseReducer0_Origin, [0; 90; 0]*deg, ND_FiSiphon, 4 in, 1 in, PS_Default)
FiReducerFreeze0 := FreezeLayer("FiRed0")
FiReducerLayer1 := layer_new("FiRed1", purple)
DrawFiSiphonAirReleaseReducer1 := reducerF(FiSiphonAirReleaseReducer1_Origin, [0; 90; 0]*deg, 4 in, ND_FiAirReleaseMid, 1 in, PS_Default)
FiReducerFreeze1 := FreezeLayer("FiRed1")
FiReducerLayer2 := layer_new("FiRed2", red)
DrawFiSiphonAirReleaseReducer2 := reducerF(FiSiphonAirReleaseReducer2_Origin, [0; 90; 0]*deg, ND_FiAirReleaseMid, .5 in, ReducerLength(2 in, .5 in), PS_Default)
# Not working! 7/15/2014
FiReducerFreeze2 := FreezeLayer("FiRed2")
FiSiphonAirReleaseReducerScript :=
    stack(FiReducerLayer0, DrawFiSiphonAirReleaseReducer0, FiReducerFreeze0, FiReducerLayer1, DrawFiSiphonAirReleaseReducer1, FiReducerFreeze1) if FiSiphonReducerConnect == 1
    stack(FiReducerLayer1, DrawFiSiphonAirReleaseReducer1, FiReducerFreeze1, FiReducerLayer2, DrawFiSiphonAirReleaseReducer2, FiReducerFreeze2) otherwise
FiSiphonAirReleaseFittingsLayer := layer_new("FiSiphonAirReleaseFittings", green)
DrawFiSiphonAirReleaseElbow1 :=
    ElbowF(FiSiphonAirReleaseElbow1_Origin, [-90; 0; -90]*deg, ND_FiAirReleaseMid, PS_Default) if EN_DoubleTrain == 0
    ElbowF(FiSiphonAirReleaseElbow1_Origin, [0; -90; -90]*deg, ND_FiAirReleaseMid, PS_Default) otherwise
# These angles are definitely WRONG!
DrawFiSiphonAirReleaseElbow2 :=
    ElbowF(FiSiphonAirReleaseElbow2_Origin, [180; 0; 90]*deg, ND_FiAirReleaseMid, PS_Default) if EN_DoubleTrain == 0
    ElbowF(FiSiphonAirReleaseElbow2_Origin, [0; 180; 90]*deg, ND_FiAirReleaseMid, PS_Default) otherwise
FiSiphonAirReleaseFittingsClose := FreezeLayer("FiSiphonAirReleaseFittings")
FiSiphonAirReleaseFittingsScript := stack(FiSiphonAirReleaseReducerScript, FiSiphonAirReleaseFittingsLayer, DrawFiSiphonAirReleaseElbow1, DrawFiSiphonAirReleaseElbow2, FiSiphonAirReleaseFittingsClose)
FiSiphonAirReleasePipesLayer := layer_new("FiSiphonAirReleasePlu", blue)
DrawFiSiphonAirReleaseReducerPipe := PipeF(FiSiphonAirReleaseReducerPipe_Origin, L_FiSiphonAirReleaseReducerPipe, [0; 90; 0]*deg, ND_FiSiphonReducerConnect, PS_Default)
DrawFiSiphonAirReleaseShortPipe := PipeF(FiSiphonAirReleaseShortPipe_Origin, L_FiSiphonAirReleaseShortPipe, [0; 90; 0]*deg, ND_FiAirReleaseMid, PS_Default)
DrawFiSiphonAirReleaseHorizPipe := PipeF(FiSiphonAirReleaseHorizPipe_Origin, L_FiSiphonAirReleaseHorizPipe, [0; 0; 0]*deg, ND_FiAirReleaseMid, PS_Default)
DrawFiSiphonAirReleaseConnectorPipe := PipeF(FiSiphonAirReleaseConnectorPipe_Origin, 2*SocketDepth(ND_FiSiphon), [0; 90; 0]*deg, ND_FiSiphon, PS_Default)
DrawFiSiphonAirReleaseVertPipe := PipeF(FiSiphonAirReleaseVertPipe_Origin, L_FiSiphonAirReleaseVertPipe, [0; 90; 0]*deg, ND_FiAirReleaseMid, PS_Default)
FiSiphonAirReleasePipesClose := FreezeLayer("FiSiphonAirReleasePlu")
FiSiphonAirReleasePlumbingScript :=
    stack(FiSiphonAirReleasePipesLayer, DrawFiSiphonAirReleaseReducerPipe, DrawFiSiphonAirReleaseShortPipe, DrawFiSiphonAirReleaseHorizPipe, DrawFiSiphonAirReleaseConnectorPipe, DrawFiSiphonAirReleaseVertPipe, FiSiphonAirReleasePipesClose) if FiSiphonReducerConnect == 1
    stack(FiSiphonAirReleasePipesLayer, DrawFiSiphonAirReleaseShortPipe, DrawFiSiphonAirReleaseHorizPipe, DrawFiSiphonAirReleaseConnectorPipe, DrawFiSiphonAirReleaseVertPipe, FiSiphonAirReleasePipesClose) otherwise
FiSiphonAirValve == insertdwg("https://confluence.cornell.edu/download/attachments/173604905/FiMetalBallValve.dwg", {
    if EN_DoubleTrain == 0
        [
            Fi_origin[0] + T_FiWall + SocketDepth(ND_FiSiphon) + ShortTeeLength(ND_FiSiphon);
            Fi_origin[1] + S_Fitting + ConRadius(ND_FiSiphon);
            Z_FiSiphonCoupling + ShortTeeLength(ND_FiSiphon) + SocketDepth(ND_FiSiphon)
        ]
    otherwise
        [
            Fi_origin[0] - S_Fitting - ConRadius(ND_FiSiphon);
            Fi_origin[1] + L_Fi + T_FiWall + SocketDepth(ND_FiSiphon) + ShortTeeLength(ND_FiSiphon);
            Z_FiSiphonCoupling + ShortTeeLength(ND_FiSiphon) + SocketDepth(ND_FiSiphon)
        ]
}, 2*outerradius(ND_FiSiphonAirValve)*1/(125 in), 2*outerradius(ND_FiSiphonAirValve)*1/(125 in), 0 deg)
FiSiphonValveLayer := layer_new("FiSiphonAirValve", black)
FiSiphonAirValve := insertdwg("https://confluence.cornell.edu/download/attachments/173604905/FiMetalBallValve.dwg", FiSiphonAirReleaseReducer2_Origin + [0 m; 0 m; ReducerLength(2 in, 1/2*in)], 2*outerradius(ND_FiSiphonAirValve)*1/(125 in), 2*outerradius(ND_FiSiphonAirValve)*1/(125 in), 0 deg)
FiSiphonValveFrz := FreezeLayer("FiSiphonAirValve")
# The reducer from 2 inches to .5 inches is not cooperating!
FiSiphonAirValveReducer := stack(FiSiphonReducerCyl1, LayerFiFittingFrz, FiSiphonReducerCyl2, GroupDelete, FiSiphonReducerSubtract, FiSiphonValveLayer, FiSiphonValveFrz, FiSiphonAirValve, FiSiphonAirReleasePlumbingScript, FiSiphonAirReleaseFittingsScript)
SelectFiFerncos := SelectLayer("FiFerncoCouplingsPlu")
FiSiphonFernco :=
    FerncoCouplingF([Fi_origin[0]; Fi_origin[1] + S_Fitting + ConRadius(ND_FiSiphon); Z_FiSiphonCoupling], [0; 0; 0]*deg, ND_FiSiphon, L_FiManFerncoCoupling) if EN_DoubleTrain == 0
    FerncoCouplingF([Fi_origin[0] - S_Fitting - ConRadius(ND_FiSiphon); Fi_origin[1] + L_Fi; Z_FiSiphonCoupling], [90; 0; 0]*deg, ND_FiSiphon, L_FiManFerncoCoupling) otherwise
FiSiphonFittingScript := stack(SelectFiFittingLayer, FiSiphonCoupling, FiSiphonTee, FiSiphonElbow1, FiSiphonManifoldCap1, FiSiphonManifoldCap2, FiSiphonTee2, FiSiphonElbow0, FiSiphonElbow01, SelectFiValveLayer, FiSiphonAirValve, LayerFiValveFrz, SelectFiFerncos, FiSiphonFernco, LayerFiFerncoFreeze, FiSiphonAirValveReducer)
# Siphon Pipes Up Until Drain Channel
L_FiSiphonManifold := L_Fi/2 - ShortTeeLength(ND_FiSiphon) - ConRadius(ND_FiSiphon) + outerradius(ND_FiSiphon) = 0.561803 m
L_FiSiphonPipe1a := T_FiWall - CouplingLength(ND_FiSiphon) + SocketDepth(ND_FiSiphon) + L_FiManFerncoCoupling/2 = 0.1368 m
L_FiSiphonPipe1b := L_Fi/2 - ElbowRadius(ND_FiSiphon) - L_FiManFerncoCoupling/2 = 0.390196 m
L_FiSiphonPipe2 := Z_FiSiphonCoupling - ElbowRadius(ND_FiSiphon) - (Z_FiSiphonInlet - outerradius(ND_FiSiphon) + ShortTeeLength(ND_FiSiphon)) = 1.32224 m
L_FiSiphonPipe3 := 2*SocketDepth(ND_FiSiphon)
L_FiSiphonPipe4 := Z_FiSiphonCoupling - ElbowRadius(ND_FiSiphon) - ShortTeeLength(ND_FiSiphon) - Fi_origin[2]
FiSiphonPipe2 := PipeF({
    if EN_DoubleTrain == 0
        [
            Fi_origin[0] - L_Fi/2;
            Fi_origin[1] + S_Fitting + ConRadius(ND_FiSiphon);
            Z_FiSiphonCoupling - ElbowRadius(ND_FiSiphon)
        ]
    otherwise
        [
            Fi_origin[0] - S_Fitting - ConRadius(ND_FiSiphon);
            Fi_origin[1] + L_Fi/2;
            Z_FiSiphonCoupling - ElbowRadius(ND_FiSiphon)
        ]
}, L_FiSiphonPipe2, [0; -90]*deg, ND_FiSiphon, PS_Default)
FiSiphonManifold1 :=
    if EN_DoubleTrain == 0
        PipeF([
            Fi_origin[0] - L_Fi/2 - ShortTeeLength(ND_FiSiphon);
            Fi_origin[1] + S_Fitting + ConRadius(ND_FiSiphon);
            Z_FiSiphonInlet - outerradius(ND_FiSiphon)
        ], L_Fi/2 - ShortTeeLength(ND_FiSiphon) - ConRadius(ND_FiSiphon) + outerradius(ND_FiSiphon), [0; 0]*deg, ND_FiSiphon, PS_Default)
    otherwise
        PipeF([
            Fi_origin[0] - S_Fitting - ConRadius(ND_FiSiphon);
            Fi_origin[1] + L_Fi/2 - ShortTeeLength(ND_FiSiphon);
            Z_FiSiphonInlet - outerradius(ND_FiSiphon)
        ], L_Fi/2 - ShortTeeLength(ND_FiSiphon) - ConRadius(ND_FiSiphon) + outerradius(ND_FiSiphon), [90; 0]*deg, ND_FiSiphon, PS_Default)
FiSiphonManifold2 :=
    if EN_DoubleTrain == 0
        PipeF([
            Fi_origin[0] - ConRadius(ND_FiSiphon) + outerradius(ND_FiSiphon);
            Fi_origin[1] + S_Fitting + ConRadius(ND_FiSiphon);
            Z_FiSiphonInlet - outerradius(ND_FiSiphon)
        ], L_Fi/2 - ShortTeeLength(ND_FiSiphon) - ConRadius(ND_FiSiphon) + outerradius(ND_FiSiphon), [0; 0]*deg, ND_FiSiphon, PS_Default)
    otherwise
        PipeF([
            Fi_origin[0] - S_Fitting - ConRadius(ND_FiSiphon);
            Fi_origin[1] + L_Fi - ConRadius(ND_FiSiphon) + outerradius(ND_FiSiphon);
            Z_FiSiphonInlet - outerradius(ND_FiSiphon)
        ], L_Fi/2 - ShortTeeLength(ND_FiSiphon) - ConRadius(ND_FiSiphon) + outerradius(ND_FiSiphon), [90; 0]*deg, ND_FiSiphon, PS_Default)
FiSiphonPipe3 :=
    if EN_DoubleTrain == 0
        PipeF([
            Fi_origin[0] + T_FiWall - SocketDepth(ND_FiSiphon);
            Fi_origin[1] + S_Fitting + ConRadius(ND_FiSiphon);
            Z_FiSiphonCoupling
        ], L_FiSiphonPipe3, [180; 0]*deg, ND_FiSiphon, PS_Default)
    otherwise
        PipeF([
            Fi_origin[0] - S_Fitting - ConRadius(ND_FiSiphon);
            Fi_origin[1] + L_Fi + T_FiWall - SocketDepth(ND_FiSiphon);
            Z_FiSiphonCoupling
        ], L_FiSiphonPipe3, [-90; 0]*deg, ND_FiSiphon, PS_Default)
FiSiphonPipe4 :=
    if EN_DoubleTrain == 0
        PipeF([
            Fi_origin[0] + T_FiWall + SocketDepth(ND_FiSiphon) + ShortTeeLength(ND_FiSiphon);
            Fi_origin[1] + S_Fitting + ConRadius(ND_FiSiphon);
            Z_FiSiphonCoupling - ShortTeeLength(ND_FiSiphon)
        ], L_FiSiphonPipe4, [0; -90]*deg, ND_FiSiphon, PS_Default)
    otherwise
        PipeF([
            Fi_origin[0] - S_Fitting - ConRadius(ND_FiSiphon);
            Fi_origin[1] + L_Fi + T_FiWall + SocketDepth(ND_FiSiphon) + ShortTeeLength(ND_FiSiphon);
            Z_FiSiphonCoupling - ShortTeeLength(ND_FiSiphon)
        ], L_FiSiphonPipe4, [0; -90]*deg, ND_FiSiphon, PS_Default)
FiSiphonPipe5 :=
    if EN_DoubleTrain == 0
        PipeF([
            Fi_origin[0] + T_FiWall + SocketDepth(ND_FiSiphon) + ShortTeeLength(ND_FiSiphon) + ElbowRadius(ND_FiSiphon) + L_FiSiphonPipeBottom;
            Fi_origin[1] + S_Fitting + ConRadius(ND_FiSiphon);
            Fi_origin[2]
        ], L_FiSiphonPipeBottom, [0; 0], ND_FiSiphon, PS_Default)
    otherwise
        PipeF([
            Fi_origin[0] - S_Fitting - ConRadius(ND_FiSiphon);
            Fi_origin[1] + L_Fi + T_FiWall + SocketDepth(ND_FiSiphon) + ShortTeeLength(ND_FiSiphon) + ElbowRadius(ND_FiSiphon) + L_FiSiphonPipeBottom;
            Fi_origin[2]
        ], L_FiSiphonPipeBottom, [90; 0]*deg, ND_FiSiphon, PS_Default)
FiSiphonPipeScript := stack(SelectFiPipeLayer, FiSiphonPipe2, FiSiphonManifold1, FiSiphonManifold2, FiSiphonPipe3, FiSiphonPipe4, FiSiphonPipe5, LayerFiPipeFrz)
# Siphon Manifold Orifices
FirstFiSiphonManOrifice := CylinderF({
    if EN_DoubleTrain == 0
        [
            Fi_origin[0] - B_FiSiphonManOrifices/2 - ConRadius(ND_FiSiphon) + outerradius(ND_FiSiphon);
            Fi_origin[1] + S_Fitting + ConRadius(ND_FiSiphon);
            Z_FiSiphonInlet - outerradius(ND_FiSiphon)
        ]
    otherwise
        [
            Fi_origin[0] - S_Fitting - ConRadius(ND_FiSiphon);
            Fi_origin[1] + L_Fi - B_FiSiphonManOrifices/2 - ConRadius(ND_FiSiphon) + outerradius(ND_FiSiphon);
            Z_FiSiphonInlet - outerradius(ND_FiSiphon)
        ]
}, D_FiSiphonManOrifices/2, 1.2*ConRadius(ND_FiSiphon), [0; 90]*deg)
ArrayFiSiphonManOrifices :=
    array_all(1, N_FiSiphonManOrifices/2, -B_FiSiphonManOrifices) if EN_DoubleTrain == 0
    array_all(N_FiSiphonManOrifices/2, 1, -B_FiSiphonManOrifices) otherwise
MirrorFiSiphonManOrifices :=
    Mirror3dAll("yz", [Fi_origin[0] - L_Fi/2; 0 m], "n") if EN_DoubleTrain == 0
    Mirror3dAll("zx", [0 m; Fi_origin[1] + L_Fi/2], "n") otherwise
FiSiphonOrifices := stack(FirstFiSiphonManOrifice, ArrayFiSiphonManOrifices, MirrorFiSiphonManOrifices)
SubtractFiSiphonOrificesPipe := SubtractF(["FiPipePlu"], "DeleteMe")
FiSiphonPipe1a :=
    if EN_DoubleTrain == 0
        PipeSUBF([
            Fi_origin[0] + T_FiWall - CouplingLength(ND_FiSiphon) + SocketDepth(ND_FiSiphon);
            Fi_origin[1] + S_Fitting + ConRadius(ND_FiSiphon);
            Z_FiSiphonCoupling
        ], L_FiSiphonPipe1a, [0; 0]*deg, ND_FiSiphon, PS_Default, ["FiTankCon"])
    otherwise
        PipeSUBF([
            Fi_origin[0] - S_Fitting - ConRadius(ND_FiSiphon);
            Fi_origin[1] + L_Fi + T_FiWall - CouplingLength(ND_FiSiphon) + SocketDepth(ND_FiSiphon);
            Z_FiSiphonCoupling
        ], L_FiSiphonPipe1a, [90; 0]*deg, ND_FiSiphon, PS_Default, ["FiTankCon"])
# these need to be stacked after the orifices, otherwise the pipes effectively union after the subtraction
FiSiphonPipe1b :=
    if EN_DoubleTrain == 0
        PipeF([
            Fi_origin[0] - L_FiManFerncoCoupling/2;
            Fi_origin[1] + S_Fitting + ConRadius(ND_FiSiphon);
            Z_FiSiphonCoupling
        ], L_FiSiphonPipe1b, [0; 0]*deg, ND_FiSiphon, PS_Default)
    otherwise
        PipeF([
            Fi_origin[0] - S_Fitting - ConRadius(ND_FiSiphon);
            Fi_origin[1] + L_Fi - L_FiManFerncoCoupling/2;
            Z_FiSiphonCoupling
        ], L_FiSiphonPipe1b, [90; 0]*deg, ND_FiSiphon, PS_Default)
SubtractFiSiphonOrificesCaps := SubtractF(["FiFittingsPlu"], "DeleteMe")
FiSiphonManOrificeScript := stack(FiSiphonOrifices, GroupDelete, SubtractFiSiphonOrificesPipe, FiSiphonOrifices, GroupDelete, SubtractFiSiphonOrificesCaps, SelectFiPipeLayer, FiSiphonPipe1a, FiSiphonPipe1b, LayerFiPipeFrz)
FiSiphonAirReleaseFittingsScript, FiSiphonAirReleasePlumbingScript
FiSiphonScript := stack(FiSiphonFittingScript, FiSiphonPipeScript, FiSiphonManOrificeScript)
# Array the Filter and Union Concrete
ThawFilter := ThawMultiple(["Fi*"])
# This is the original matrix:
["FiAuxPipePlu"; "FiAuxFittingPlu"; "FiAuxRemovablePlu"; "FiDistPipePlu"; "FiDistFittingPlu"; "FiOverflowDistBoxCon"; "FiInletChannelCon"; "FiInletFittingsPlu"; "FiInletPipePlu"]
FiArray1Frz := ["FiAuxPipePlu"; "FiAuxFittingPlu"; "FiAuxRemovablePlu"; "FiDistPipePlu"; "FiDistFittingPlu"; "FiOverflowDistBoxCon"; "FiInletChannelCon"; "FiInletFittingsPlu"; "FiInletPipePlu"; "FiWeirControlCon"; "FiInletElbow"; "FiEntranceVertPipeLayer"; "FiEntranceVertCouplingLayer"]
FreezeFiPieces := FreezeMultiple(FiArray1Frz)
ArrayFi1 :=
    Array_All(N_Fi, 1, -(W_Fi + T_FiWall)) if EN_DoubleTrain == 0
    Array_All(1, N_Fi, W_Fi + T_FiWall) otherwise
FreezeFi := FreezeMultiple(["Fi*"])
FiArray2Thw := ["FiAuxPipePlu"; "FiAuxFittingPlu"; "FiAuxRemovablePlu"; "FiDistPipePlu"; "FiDistFittingPlu"; "FiOverflowDistBoxCon"]
ThawFiPieces := ThawMultiple(FiArray2Thw)
ArrayFi2 :=
    Array_All(N_Fi - (N_Fi > 1), 1, -(W_FiEntrance + 2*T_PlantWall + W_FiOverflow)) if EN_DoubleTrain == 0
    Array_All(1, N_Fi - (N_Fi > 1), W_FiEntrance + 2*T_PlantWall + W_FiOverflow) otherwise
ThawFilterConcrete := ThawMultiple(["Fi*Con"])
RenameFilterConcrete :=
    RenameLayer("FiEntExitBoxCon", "FiCon") if N_Fi == 2
    RenameLayer("FiOverflowDistBoxCon", "FiCon") otherwise
GroupFilterConcrete := GroupAll("FiCon")
FiArrayScript :=
    stack(ThawFilterConcrete, Union_All, RenameFilterConcrete, GroupFilterConcrete, FreezeFi) if N_Fi == 1
    stack(ThawFilter, FreezeFiPieces, ArrayFi1, FreezeFi, ThawFiPieces, ArrayFi2, FreezeFi, ThawFilterConcrete, Union_All, RenameFilterConcrete, GroupFilterConcrete, FreezeFi) otherwise
FiEntranceCutout := BoxF(FiEntranceBox_origin, FiEntranceBox_origin + {
    [-L_FiEntrance; W_FiEntrance; H_FiEntrance] if EN_DoubleTrain == 0
    [-W_FiEntrance; L_FiEntrance; H_FiEntrance] otherwise
}, [0; 0; 0]*deg)
ArrayFiEntranceCutout := ArrayLast(1, N_Fi, W_FiEntrance + 2*T_FiWall + W_FiOverflow)
FiExitCutout := BoxF(FiExitBox_origin, FiExitBox_origin + {
    [-L_FiExit; W_FiEntrance; H_FiEntrance] if EN_DoubleTrain == 0
    [-W_FiEntrance; L_FiExit; H_FiEntrance] otherwise
}, [0; 0; 0]*deg)
ArrayFiExitCutout := ArrayLast(1, N_Fi, W_FiEntrance + 2*T_FiWall + W_FiOverflow)
FiOverflowCutout := BoxF(FiOverflowBox_Origin, FiOverflowBox_Origin + {
    [-L_FiEntrance; W_FiOverflow; H_FiEntrance] if EN_DoubleTrain == 0
    [-W_FiOverflow; L_FiEntrance; H_FiEntrance] otherwise
}, [0; 0; 0]*deg)
ArrayFiOverflowCutout := ArrayLast(1, N_Fi - 1, W_FiEntrance + 2*T_FiWall + W_FiOverflow)
FiDistCutout := BoxF(FiDistBox_Origin, FiDistBox_Origin + {
    [-L_FiExit; W_FiOverflow; H_FiEntrance] if EN_DoubleTrain == 0
    [-W_FiOverflow; L_FiExit; H_FiEntrance] otherwise
}, [0; 0; 0]*deg)
ArrayFiDistCutout := ArrayLast(1, N_Fi - 1, W_FiEntrance + 2*T_FiWall + W_FiOverflow)
FiIChannelCutout := BoxF(FiInletChannel_Origin, FiInletChannel_Origin + {
    [-L_FiInletChannel; T_PlantWall; H_FiInletChannel] if EN_DoubleTrain == 0
    [-T_PlantWall; L_FiInletChannel; H_FiInletChannel] otherwise
}, [0; 0; 0]*deg)
FiArrayWallAdjust :=
    if EN_DoubleTrain == 0
        BoxF(FiOverflowBox_Origin + [T_PlantWall + L_FiOverflow; T_ChannelWall; -T_PlantWall], FiOverflowBox_Origin + [
            -W_FiEntrance - T_ChannelWall - W_FiEntrance - T_PlantWall + L_FiOverflow;
            T_PlantWall;
            H_FiEntrance
        ], [0; 0; 0]*deg)
    otherwise
        BoxF(FiOverflowBox_Origin + [T_ChannelWall; T_PlantWall + L_FiOverflow; -T_PlantWall], FiOverflowBox_Origin + [
            T_PlantWall;
            -W_FiEntrance - T_ChannelWall - W_FiEntrance - T_PlantWall + L_FiOverflow;
            H_FiEntrance
        ], [0; 0; 0]*deg)
# The wall thickness cutouts are only needed if for some reason the plant wall thickness has to be adjusted! NOT currently used or needed!
FiWallThicknessCutouts :=
    stack(FiEntranceCutout, ArrayFiEntranceCutout, FiExitCutout, ArrayFiExitCutout, FiOverflowCutout, ArrayFiOverflowCutout, FiDistCutout, ArrayFiDistCutout, FiIChannelCutout) if N_Fi < 2
    stack(FiEntranceCutout, ArrayFiEntranceCutout, FiExitCutout, ArrayFiExitCutout, FiOverflowCutout, ArrayFiOverflowCutout, FiDistCutout, ArrayFiDistCutout, FiIChannelCutout, FiArrayWallAdjust, ArrayFiDistCutout) otherwise
FiEntWeir :=
    BoxF([FiEntranceBox_origin[0]; FiEntranceBox_origin[1]; Z_FiEntranceWeir], [FiEntranceBox_origin[0] + T_PlantWall; FiEntranceBox_origin[1] + W_FiEntrance; Z_FiTop], [0; 0; 0]*deg) if EN_DoubleTrain == 0
    otherwise
        BoxF([FiEntranceBox_origin[0]; FiEntranceBox_origin[1] + L_FiEntrance; Z_FiEntranceWeir], [
            FiEntranceBox_origin[0] - W_FiEntrance;
            FiEntranceBox_origin[1] + L_FiEntrance + T_PlantWall;
            Z_FiTop
        ], [0; 0; 0]*deg)
# Not currently used 6-20-14
# Instead, an adjustable weir is drawn here.
ArrayFiEntWeir :=
    ArrayLast(N_Fi, 1, -(2*T_PlantWall + W_FiEntrance + W_FiOverflow)) if EN_DoubleTrain == 0
    ArrayLast(1, N_Fi, W_FiEntrance + 2*T_PlantWall + W_FiOverflow) otherwise
FiOverflowWeirs :=
    if EN_DoubleTrain == 0
        BoxF([FiEntranceBox_origin[0] - L_FiEntrance; FiEntranceBox_origin[1]; Z_FiOverflowWeir], [
            FiEntranceBox_origin[0] - L_FiEntrance + L_FiOverflowWeir;
            FiEntranceBox_origin[1] - T_ChannelWall - (N_Fi > 1)*(N_Fi - 1)*(W_FiOverflow + T_PlantWall) - (N_Fi > 2)*(N_Fi - 1)*(W_FiEntrance + T_PlantWall);
            Z_FiTop
        ], [0; 0; 0]*deg)
    otherwise
        BoxF([FiEntranceBox_origin[0]; FiEntranceBox_origin[1]; Z_FiOverflowWeir], [
            FiEntranceBox_origin[0] + T_ChannelWall + (N_Fi > 1)*(N_Fi - 1)*(W_FiOverflow + T_ChannelWall) + (N_Fi > 2)*(N_Fi - 1)*(W_FiEntrance + T_ChannelWall);
            FiEntranceBox_origin[1] + L_FiOverflowWeir;
            Z_FiTop
        ], [0; 0; 0]*deg)
FiDistBarrierCut :=
    if EN_DoubleTrain == 0
        BoxF(FiExitBox_origin + [0 m; 0 m; H_FiExit], FiExitBox_origin + [
            -L_FiExit;
            -T_PlantWall - (N_Fi > 1)*(N_Fi - 1)*(W_FiOverflow + T_PlantWall) - (N_Fi > 2)*(N_Fi - 1)*(W_FiEntrance + T_PlantWall);
            H_FiDistBarrier
        ], [0; 0; 0]*deg)
    otherwise
        BoxF(FiExitBox_origin + [0 m; L_FiExit; H_FiExit], FiExitBox_origin + [
            T_ChannelWall + (N_Fi > 1)*(N_Fi - 1)*(W_FiOverflow + T_FiWall) + (N_Fi > 2)*(N_Fi - 1)*(W_FiEntrance + T_FiWall);
            0 m;
            H_FiDistBarrier
        ], [0; 0; 0]*deg)
FiSubtractWeirs := SubtractF(["Fi*Con"], "DeleteMe")
Z_FiOverflowWeir = 1.675 m
# Weir Control System at Plant Inlet. Not yet flexible for when EN.DoubleTrain is greater than 0
# Only stack into code if the N.Fi >=2 !
# Using T.SedWeir for the thickness (as above)
FiEntranceBox_origin = [-10.9448; 4.73185; 0.775005] m
FiInletChannel_Origin = [-10.4582; 2.77254; 1.59413] m
FiInletEntranceStep := FiInletChannel_Origin[2] - FiEntranceBox_origin[2]
FiInletEntranceStep = 0.819128 m
ArrayCutouts :=
    Array_All(N_Fi, 1, -(W_Fi + T_FiWall)) if EN_DoubleTrain == 0
    Array_All(1, N_Fi, W_Fi + T_FiWall) otherwise
FiSubtractWeir := SubtractF(["Fi*Con"], "DeleteMe")
ArrayWeirs :=
    Array_All(N_Fi, 1, -(W_Fi + T_FiWall)) if EN_DoubleTrain == 0
    Array_All(1, N_Fi, W_Fi + T_FiWall) otherwise
FreezeFrontBoxWeirLayer := FreezeLayer("FiFrontBoxWeir")
MakeInletWeirLayer := layer_new("FiInletControlWeir", purple)
WeirControlBox2 := BoxF(FiEntranceBox_origin + [
    0 m;
    FiEntranceBox_dim[1]/2 - L_FiEntranceWeir/2;
    FiInletEntranceStep + H_FiInletChannel - H_FiEntranceWeirSlot
], FiEntranceBox_origin + [T_PlantWall; FiEntranceBox_dim[1]/2 + L_FiEntranceWeir/2; FiInletEntranceStep + H_FiInletChannel], [0; 0; 0]*deg)
WeirSlot2 := BoxF(FiEntranceBox_origin + [
    T_PlantWall/2 - T_SedWeir/2;
    FiEntranceBox_dim[1]/2 - L_FiEntranceWeir/2 - T_ConcreteMin;
    FiInletEntranceStep + H_FiInletChannel - H_FiEntranceWeirSlot
], FiEntranceBox_origin + [
    T_PlantWall/2 + T_SedWeir/2;
    FiEntranceBox_dim[1]/2 + L_FiEntranceWeir/2 + T_ConcreteMin;
    FiInletEntranceStep + H_FiInletChannel
], [0; 0; 0]*deg)
Weir2 := BoxF(FiEntranceBox_origin + [
    T_PlantWall/2 - T_SedWeir/2;
    FiEntranceBox_dim[1]/2 - L_FiEntranceWeir/2 - T_ConcreteMin;
    FiInletEntranceStep + H_FiInletChannel - H_FiEntranceWeirSlot
], FiEntranceBox_origin + [
    T_PlantWall/2 + T_SedWeir/2;
    FiEntranceBox_dim[1]/2 + L_FiEntranceWeir/2 + T_ConcreteMin;
    FiInletEntranceStep + H_FiInletChannel - H_FiEntranceWeirSlot + H_FiEntranceWeirRemovable
], [0; 0; 0]*deg)
FreezeInletWeirLayer := FreezeLayer("FiInletControlWeir")
FiInletWeirScript := stack(MakeInletWeirLayer, WeirControlBox2, WeirSlot2, ArrayCutouts, GroupDelete, FiSubtractWeir, Weir2, ArrayWeirs, FreezeInletWeirLayer)
FiWeirScript := stack(FiInletWeirScript, FiOverflowWeirs, FiDistBarrierCut, GroupDelete, FiSubtractWeirs)
# Overflow, Inlet and Distribution Weirs, and Adjust Wall Thickness
SelectDistFittingLayer := SelectLayer("FiDistFittingPlu")
FiDistElbow2 :=
    if EN_DoubleTrain == 0
        ElbowF([
            min(FiExitBox_origin[0] - L_FiExit/2 - ElbowRadius(ND_DistPipe) - 2*SocketDepth(ND_DistPipe), FiExitBox_origin[0] - L_FiExit - T_PlantWall);
            FiEntranceBox_origin[1] - T_ChannelWall - W_FiOverflow/2;
            Z_FiDistPipe
        ], [90; 0; 0]*deg, ND_DistPipe, PS_Default)
    otherwise
        ElbowF([
            FiEntranceBox_origin[0] + T_ChannelWall + W_FiOverflow/2;
            FiExitBox_origin[1] + L_FiExit/2 - ElbowRadius(ND_DistPipe) - 2*SocketDepth(ND_DistPipe);
            Z_FiDistPipe + ElbowRadius(ND_DistPipe)
        ], [180; 0; 0]*deg, ND_DistPipe, PS_Default)
FiDistTee :=
    if EN_DoubleTrain == 0
        TeeF([
            min(FiExitBox_origin[0] - L_FiExit/2 - ElbowRadius(ND_DistPipe) - 2*SocketDepth(ND_DistPipe), FiExitBox_origin[0] - L_FiExit - T_PlantWall) - ElbowRadius(ND_DistPipe) + ShortTeeLength(ND_DistPipe);
            FiEntranceBox_origin[1] - W_FiEntrance - 2*T_PlantWall - 3/2*W_FiOverflow - T_ChannelWall;
            Z_FiDistPipe
        ], [270; 0; 0]*deg, ND_DistPipe, PS_Default)
    otherwise
        TeeF([
            FiEntranceBox_origin[0] + 3*T_ChannelWall + 3*W_FiOverflow/2 + W_FiEntrance;
            min(FiExitBox_origin[1] + L_FiExit/2 - ElbowRadius(ND_DistPipe) - 2*SocketDepth(ND_DistPipe), FiExitBox_origin[1] - T_PlantWall) - ElbowRadius(ND_DistPipe) + ShortTeeLength(ND_DistPipe);
            Z_FiDistPipe
        ], [0; 0; 0]*deg, ND_DistPipe, PS_Default)
ArrayFiDist :=
    ArrayLast(N_Fi - 2, 1, -(W_FiEntrance + W_FiOverflow + 2*T_PlantWall)) if EN_DoubleTrain == 0
    ArrayLast(1, N_Fi - 2, W_FiEntrance + W_FiOverflow + 2*T_PlantWall) otherwise
FiDistFinishFittingScript :=
    stack(SelectDistFittingLayer, FiDistElbow2, FiDistFittingFrz) if N_Fi ≤ 2
    stack(SelectDistFittingLayer, FiDistElbow2, FiDistTee, ArrayFiDist, FiDistFittingFrz) otherwise
SelectDistPipeLayer := SelectLayer("FiDistPipePlu")
L_FiDistPipe2 := max(L_FiExit/2 - ElbowRadius(ND_DistPipe) + T_PlantWall, 2*SocketDepth(ND_DistPipe))
L_FiDistPipe3 := W_FiOverflow + W_FiEntrance + 2*T_PlantWall - ElbowRadius(ND_DistPipe) - TeeLength(ND_DistPipe)/2
L_FiDistPipe4 := max(L_FiExit/2 - ElbowRadius(ND_DistPipe) + T_PlantWall, 2*SocketDepth(ND_DistPipe)) + ElbowRadius(ND_DistPipe) - ShortTeeLength(ND_DistPipe)
L_FiDistPipe5 := W_FiOverflow + W_FiEntrance + 2*T_PlantWall - TeeLength(ND_DistPipe)
FiDistPipe2 :=
    if EN_DoubleTrain == 0
        PipeF([
            FiExitBox_origin[0] - L_FiExit/2 - ElbowRadius(ND_DistPipe);
            FiEntranceBox_origin[1] - T_ChannelWall - W_FiOverflow/2;
            Z_FiDistPipe
        ], L_FiDistPipe2, [0; 0; 0]*deg, ND_DistPipe, PS_Default)
    otherwise
        PipeF([
            FiEntranceBox_origin[0] + T_ChannelWall + W_FiOverflow/2;
            FiExitBox_origin[1] + L_FiExit/2 - ElbowRadius(ND_DistPipe);
            Z_FiDistPipe
        ], L_FiDistPipe2, [90; 0; 0]*deg, ND_DistPipe, PS_Default)
FiDistPipe3 :=
    if EN_DoubleTrain == 0
        PipeF([
            min(FiExitBox_origin[0] - L_FiExit/2 - ElbowRadius(ND_DistPipe) - 2*SocketDepth(ND_DistPipe), FiExitBox_origin[0] - L_FiExit - T_PlantWall) - ElbowRadius(ND_DistPipe);
            FiEntranceBox_origin[1] - T_ChannelWall - W_FiOverflow/2 - ElbowRadius(ND_DistPipe);
            Z_FiDistPipe
        ], L_FiDistPipe3, [90; 0; 0]*deg, ND_DistPipe, PS_Default)
    otherwise
        PipeF([
            FiEntranceBox_origin[0] + T_ChannelWall + W_FiOverflow/2 + ElbowRadius(ND_DistPipe) + L_FiDistPipe3;
            min(FiExitBox_origin[1] + L_FiExit/2 - ElbowRadius(ND_DistPipe) - 2*SocketDepth(ND_DistPipe), FiExitBox_origin[1] - T_PlantWall) - ElbowRadius(ND_DistPipe);
            Z_FiDistPipe
        ], L_FiDistPipe3, [0; 0; 0]*deg, ND_DistPipe, PS_Default)
FiDistPipe4 :=
    if EN_DoubleTrain == 0
        PipeF([
            FiExitBox_origin[0] - L_FiExit/2 - ElbowRadius(ND_DistPipe);
            FiEntranceBox_origin[1] - W_FiEntrance - 2*T_PlantWall - 3/2*W_FiOverflow - T_ChannelWall;
            Z_FiDistPipe
        ], L_FiDistPipe4, [0; 0; 0]*deg, ND_DistPipe, PS_Default)
    otherwise
        PipeF([
            FiEntranceBox_origin[0] + W_FiEntrance + 2*T_PlantWall + 3/2*W_FiOverflow + T_ChannelWall;
            FiExitBox_origin[1] + L_FiExit/2 - ElbowRadius(ND_DistPipe);
            Z_FiDistPipe
        ], L_FiDistPipe4, [90; 0; 0]*deg, ND_DistPipe, PS_Default)
FiDistPipe5 :=
    if EN_DoubleTrain == 0
        PipeF([
            min(FiExitBox_origin[0] - L_FiExit/2 - ElbowRadius(ND_DistPipe) - 2*SocketDepth(ND_DistPipe), FiExitBox_origin[0] - L_FiExit - T_PlantWall) - ElbowRadius(ND_DistPipe);
            FiEntranceBox_origin[1] - W_FiEntrance - 2*T_PlantWall - 3/2*W_FiOverflow - TeeLength(ND_DistPipe)/2 - T_ChannelWall;
            Z_FiDistPipe
        ], L_FiDistPipe5, [90; 0; 0]*deg, ND_DistPipe, PS_Default)
    otherwise
        PipeF([
            FiEntranceBox_origin[0] + W_FiEntrance + 2*T_PlantWall + 3/2*W_FiOverflow + TeeLength(ND_DistPipe)/2 + T_ChannelWall;
            min(FiExitBox_origin[1] + L_FiExit/2 - ElbowRadius(ND_DistPipe) - 2*SocketDepth(ND_DistPipe), FiExitBox_origin[1] - T_PlantWall) - ElbowRadius(ND_DistPipe);
            Z_FiDistPipe
        ], L_FiDistPipe5, [0; 180; 0]*deg, ND_DistPipe, PS_Default)
FiDistFinishPipeScript :=
    stack(SelectDistPipeLayer, FiDistPipe2, FiDistPipe3, FiDistPipeFrz) if N_Fi ≤ 2
    stack(SelectDistPipeLayer, FiDistPipe2, FiDistPipe3, FiDistPipe4, ArrayFiDist, FiDistPipe5, ArrayFiDist, FiDistPipeFrz) otherwise
FiDistFinishScript := stack(FiDistFinishFittingScript, FiDistFinishPipeScript)
# Finish Distribution Plumbing
# Finish Siphon Plumbing
# Channel Coupling
FiSiphonChannelCoupling_Origin :=
    if EN_DoubleTrain == 0
        [
            Fi_origin[0] + T_FiWall + SocketDepth(ND_FiSiphon) + ShortTeeLength(ND_FiSiphon) + 2*ElbowRadius(ND_FiSiphon) + L_FiSiphonPipeBottom;
            Fi_origin[1] + S_Fitting + ConRadius(ND_FiSiphon);
            PlantLowerDC_Origin[2] - H_PlantDC - Slope_PlantDC*(L_PlantLowerDC - (T_PlantWall + Fi_origin[1] + S_Fitting + 2*ConRadius(ND_FiSiphon))) - SocketDepth(ND_FiSiphon)
        ]
    otherwise
        [
            Fi_origin[0] - S_Fitting - ConRadius(ND_FiSiphon);
            Fi_origin[1] + L_Fi + T_FiWall + SocketDepth(ND_FiSiphon) + ShortTeeLength(ND_FiSiphon) + 2*ElbowRadius(ND_FiSiphon) + L_FiSiphonPipeBottom;
            PlantSideDC_Origin[2] - H_PlantDC + Slope_PlantDC*((Plant_Origin[0] - L_Sed - T_PlantWall) - (Fi_origin[0] - S_Fitting - ConRadius(ND_FiSiphon))) - CouplingLength(ND_FiSiphon)
        ]
FiSiphonChannelCoupling(N) := CouplingSUBF(FiSiphonChannelCoupling_Origin + {
    ((N - 1)*[0 m; -W_Fi - T_FiWall; -Slope_PlantDC*(W_Fi + T_FiWall)]) if EN_DoubleTrain == 0
    ((N - 1)*[W_Fi + T_FiWall; 0 m; Slope_PlantDC*(W_Fi + T_FiWall)]) otherwise
}, [0; 270]*deg, ND_FiSiphon, PS_Default, ["DrainChannelCon"])
FiSiphonChannelCouplingScript :=
    N ← 1
    Local ← stack(SelectFiFittingLayer, FiSiphonChannelCoupling(N))
    while N_Fi > N
        N ← N + 1
        Local ← stack(Local, FiSiphonChannelCoupling(N))
    Local ← stack(Local, LayerFiFittingFrz)
    return Local
# Pipe Beneath Drain Channel
FiSiphonChannelPipe_Origin :=
    if EN_DoubleTrain == 0
        [
            Fi_origin[0] + T_FiWall + SocketDepth(ND_FiSiphon) + ShortTeeLength(ND_FiSiphon) + 2*ElbowRadius(ND_FiSiphon) + L_FiSiphonPipeBottom;
            Fi_origin[1] + S_Fitting + ConRadius(ND_FiSiphon);
            Fi_origin[2] + ElbowRadius(ND_FiSiphon)
        ]
    otherwise
        [
            Fi_origin[0] - S_Fitting - ConRadius(ND_FiSiphon);
            Fi_origin[1] + L_Fi + T_FiWall + SocketDepth(ND_FiSiphon) + ShortTeeLength(ND_FiSiphon) + 2*ElbowRadius(ND_FiSiphon) + L_FiSiphonPipeBottom;
            Fi_origin[2] + ElbowRadius(ND_FiSiphon)
        ]
L_FiSiphonChannelPipe1 := FiSiphonChannelCoupling_Origin[2] - CouplingLength(ND_FiSiphon) + 2*SocketDepth(ND_FiSiphon) - (Z_FiBottom + ElbowRadius(ND_FiSiphon)) = 1.26479 m
FiSiphonChannelPipe(N) := PipeSUBF(FiSiphonChannelPipe_Origin + {
    ((N - 1)*[0 m; -W_Fi - T_FiWall; 0 m]) if EN_DoubleTrain == 0
    ((N - 1)*[W_Fi + T_FiWall; 0 m; 0 m]) otherwise
}, L_FiSiphonChannelPipe1 - (N - 1)*Slope_PlantDC*(W_Fi + T_FiWall), [0; 90]*deg, ND_FiSiphon, PS_Default, ["DrainChannelCon"])
FiSiphonChannelPipeScript :=
    N ← 1
    Local ← stack(SelectFiPipeLayer, FiSiphonChannelPipe(N))
    while N_Fi > N
        N ← N + 1
        Local ← stack(Local, FiSiphonChannelPipe(N))
    return Local
# Drain Channel Stub
L_FiSiphonChannelStub := Z_FiSiphonOutlet - FiSiphonChannelCoupling_Origin[2] = 0.282093 m
FiSiphonChannelStub(N) := PipeF(FiSiphonChannelCoupling_Origin + {
    ((N - 1)*[0 m; -W_Fi - T_FiWall; -Slope_PlantDC*(W_Fi + T_FiWall)]) if EN_DoubleTrain == 0
    ((N - 1)*[W_Fi + T_FiWall; 0 m; -Slope_PlantDC*(W_Fi + T_FiWall)]) otherwise
}, L_FiSiphonChannelStub + (N - 1)*Slope_PlantDC*(W_Fi + T_FiWall), [0; 90; 0]*deg, ND_FiSiphon, PS_Default)
FiSiphonChannelStubScript :=
    N ← 1
    Local ← FiSiphonChannelStub(N)
    while N_Fi > N
        N ← N + 1
        Local ← stack(Local, FiSiphonChannelStub(N))
    Local ← stack(Local, LayerFiPipeFrz)
    return Local
FiSiphonFinishScript := stack(FiSiphonChannelCouplingScript, FiSiphonChannelPipeScript, FiSiphonChannelStubScript)
# Finish Box Drain Plumbing
# Overflow Box Drain Couplings and Elbow
FiOverflowDrainElbow(N) :=
    if EN_DoubleTrain == 0
        ElbowSUBF([
            X_FiOverflowHorizDrainPipeEnd - ElbowRadius(ND_FiEntOverflow);
            FiEntranceBox_origin[1] - T_ChannelWall - W_FiOverflow/2 - (N - 1)*(W_Fi + T_FiWall);
            Z_FiOverflowVertDrainPipeEnd
        ], [180; 0; 90]*deg, ND_FiEntOverflow, PS_Default, ["FiCon"])
    otherwise
        ElbowSUBF([
            FiEntranceBox_origin[0] + T_ChannelWall + W_FiOverflow/2 + (N - 1)*(W_Fi + T_FiWall);
            Y_FiOverflowHorizDrainPipeEnd - ElbowRadius(ND_FiEntOverflow);
            Z_FiOverflowVertDrainPipeEnd
        ], [0; 90; -90]*deg, ND_FiEntOverflow, PS_Default, ["FiCon"])
FiOverflowDrainElbowScript :=
    N ← 1
    Local ← stack(SelectFiFittingLayer, FiOverflowDrainElbow(N))
    while N_Fi - 1 > N
        N ← N + 1
        Local ← stack(Local, FiOverflowDrainElbow(N))
    return Local
# Added the front box width to the coupling origin 6-19-14
# the elbow is stacked within the coupling!!!
FiOverflowDrainCouplingHoriz(N) :=
    if EN_DoubleTrain == 0
        CouplingSUBF([
            FiInletChannel_Origin[0] + T_PlantWall - SocketDepth(ND_FiEntOverflow);
            FiEntranceBox_origin[1] - T_ChannelWall - W_FiOverflow/2 - (N - 1)*(W_Fi + T_FiWall);
            Z_FiOverflowVertDrainPipeEnd - ElbowRadius(ND_FiEntOverflow)
        ], [0; 0], ND_FiEntOverflow, PS_Default, ["DrainChannelCon"])
    otherwise
        CouplingSUBF([
            FiEntranceBox_origin[0] + T_ChannelWall + W_FiOverflow/2 + (N - 1)*(W_Fi + T_FiWall);
            FiInletChannel_Origin[1] + W_FiInletChannel + T_PlantWall - SocketDepth(ND_FiEntOverflow);
            Z_FiOverflowVertDrainPipeEnd - ElbowRadius(ND_FiEntOverflow)
        ], [90; 0]*deg, ND_FiEntOverflow, PS_Default, ["DrainChannelCon"])
FiOverflowCouplingFinishScript :=
    N ← 1
    Local ← stack(FiOverflowDrainElbowScript, FiOverflowDrainCouplingHoriz(N))
    while N_Fi - 1 > N
        N ← N + 1
        Local ← stack(Local, FiOverflowDrainCouplingHoriz(N))
    Local ← stack(Local, LayerFiFittingFrz)
    return Local
X_FiOverflowHorizDrainPipeStart = -10.41 m
# Overflow Box Drain Horizontal Pipes
FiOverflowDrainPipeHoriz(N) :=
    if EN_DoubleTrain == 0
        PipeSUBF([
            X_FiOverflowHorizDrainPipeStart;
            FiEntranceBox_origin[1] - T_ChannelWall - W_FiOverflow/2 - (N - 1)*(W_Fi + T_FiWall);
            Z_FiOverflowVertDrainPipeEnd - ElbowRadius(ND_FiEntOverflow)
        ], X_FiOverflowHorizDrainPipeStart - X_FiOverflowHorizDrainPipeEnd, [0; 0], ND_FiEntOverflow, PS_Default, ["DrainChannelCon"])
    otherwise
        PipeSUBF([
            FiEntranceBox_origin[0] + T_ChannelWall + W_FiOverflow/2 + (N - 1)*(W_Fi + T_FiWall);
            Y_FiOverflowHorizDrainPipeStart;
            Z_FiOverflowVertDrainPipeEnd - ElbowRadius(ND_FiEntOverflow)
        ], Y_FiOverflowHorizDrainPipeStart - Y_FiOverflowHorizDrainPipeEnd, [90; 0]*deg, ND_FiEntOverflow, PS_Default, ["DrainChannelCon"])
FiOverflowPipeFinishScript :=
    N ← 1
    Local ← stack(SelectFiPipeLayer, FiOverflowDrainPipeHoriz(N))
    while N_Fi - 1 > N
        N ← N + 1
        Local ← stack(Local, FiOverflowDrainPipeHoriz(N))
    Local ← stack(Local, LayerFiPipeFrz)
    return Local
# Added front box dimensions to the coupling origin
# Exit Box Drain Couplings
FiExitDrainChanCoupling(N) :=
    if EN_DoubleTrain == 0
        CouplingSUBF([
            FiInletChannel_Origin[0] + T_PlantWall - SocketDepth(ND_FiExitWaste);
            FiExitCoupling3_origin[1] - (N - 1)*(W_Fi + T_FiWall);
            Z_FiExitDrainOutlet
        ], [0; 0], ND_FiExitWaste, PS_Default, ["DrainChannelCon"])
    otherwise
        CouplingSUBF([
            FiExitCoupling3_origin[0] + (N - 1)*(W_Fi + T_FiWall);
            FiInletChannel_Origin[1] + W_FiInletChannel + T_PlantWall - SocketDepth(ND_FiExitWaste);
            Z_FiExitDrainOutlet
        ], [90; 0]*deg, ND_FiExitWaste, PS_Default, ["DrainChannelCon"])
FiExitHorizDrainCouplingScript :=
    N ← 1
    Local ← stack(SelectFiFittingLayer, FiExitDrainChanCoupling(N))
    while N_Fi > N
        N ← N + 1
        Local ← stack(Local, FiExitDrainChanCoupling(N))
    Local ← stack(Local, LayerFiFittingFrz)
    return Local
# Is this the one?
# Exit Box Drain Horizontal Pipes
L_FiExitDrainPipeHoriz :=
    (X_FiExitHorizDrainPipeStart - X_FiExitHorizDrainPipeEnd) if EN_DoubleTrain == 0
    (Y_FiExitHorizDrainPipeStart - Y_FiExitHorizDrainPipeEnd) otherwise
FiExitDrainPipeHoriz(N) :=
    if EN_DoubleTrain == 0
        PipeSUBF([
            X_FiExitHorizDrainPipeStart;
            FiExitCoupling3_origin[1] - (N - 1)*(W_Fi + T_FiWall);
            Z_FiExitDrainOutlet
        ], L_FiExitDrainPipeHoriz, [0; 0], ND_FiExitWaste, PS_Default, ["DrainChannelCon"])
    otherwise
        PipeSUBF([
            FiExitCoupling3_origin[0] + (N - 1)*(W_Fi + T_FiWall);
            Y_FiExitHorizDrainPipeStart;
            Z_FiExitDrainOutlet
        ], L_FiExitDrainPipeHoriz, [90; 0]*deg, ND_FiExitWaste, PS_Default, ["DrainChannelCon"])
FiExitHorizDrainPipeScript :=
    N ← 1
    Local ← stack(SelectFiPipeLayer, FiExitDrainPipeHoriz(N))
    while N_Fi > N
        N ← N + 1
        Local ← stack(Local, FiExitDrainPipeHoriz(N))
    Local ← stack(Local, LayerFiPipeFrz)
    return Local
FiBoxDrainFinishScript := stack(FiOverflowCouplingFinishScript, FiOverflowPipeFinishScript, FiExitHorizDrainCouplingScript, FiExitHorizDrainPipeScript)
# Adding Boxes to Show Heights of Water and Sand
FiWaterLayer := layer_new("FiWater", blue2)
Water_FiInletChannel := BoxF(FiInletChannel_Origin, FiInletChannel_Origin + [-W_FiInletChannel; L_FiInletChannel; ZW_FiInletChannel - FiInletChannel_Origin[2]], [0; 0; 0]*deg)
Water_FiEntranceBoxTerminal := BoxF(FiEntranceBox_origin, FiEntranceBox_origin + [-L_FiEntrance; W_FiEntrance; ZW_FiEntranceTerminal - FiEntranceBox_origin[2]], [0; 0; 0]*deg)
Water_FiBoxTerminal := BoxF(Fi_origin, Fi_origin + [-L_Fi; W_Fi; ZW_FiMax - Z_FiBottom], [0; 0; 0]*deg)
Water_FiEntranceBoxClean := BoxF(FiEntranceBox_origin, FiEntranceBox_origin + [-L_FiEntrance; W_FiEntrance; ZW_FiEntranceCleanForward - FiEntranceBox_origin[2]], [0; 0; 0]*deg)
Water_FiBoxClean := BoxF(Fi_origin, Fi_origin + [-L_Fi; W_Fi; ZW_FiClean - Z_FiBottom], [0; 0; 0]*deg)
Water_FiEntranceBoxBw := BoxF(FiEntranceBox_origin, FiEntranceBox_origin + [-L_FiEntrance; W_FiEntrance; ZW_FiEntranceBwSS - FiEntranceBox_origin[2]], [0; 0; 0]*deg)
Water_FiBoxBw := BoxF(Fi_origin, Fi_origin + [-L_Fi; W_Fi; ZW_FiBwSS - Z_FiBottom], [0; 0; 0]*deg)
FreezeFiWater := FreezeLayer("FiWater")
FiWaterTerminalScript := stack(FiWaterLayer, Water_FiInletChannel, Water_FiEntranceBoxTerminal, Water_FiBoxTerminal, FreezeFiWater)
FiWaterCleanScript := stack(FiWaterLayer, Water_FiInletChannel, Water_FiEntranceBoxClean, Water_FiBoxClean, FreezeFiWater)
FiWaterBwScript := stack(FiWaterLayer, Water_FiInletChannel, Water_FiEntranceBoxBw, Water_FiBoxBw, FreezeFiWater)
FiSandLayer := layer_new("FiSand", yellow)
Sand_FiBoxForward := BoxF(Fi_origin, Fi_origin + [-L_Fi; W_Fi; H_FiSand], [0; 0; 0]*deg)
Sand_FiBoxBw := BoxF(Fi_origin, Fi_origin + [-L_Fi; W_Fi; H_FiFluidizedBed], [0; 0; 0]*deg)
FreezeFiSand := FreezeLayer("FiSand")
FiSandForwardScript := stack(FiSandLayer, Sand_FiBoxForward, FreezeFiSand)
FiSandBwScript := stack(FiSandLayer, Sand_FiBoxBw, FreezeFiSand)
ThawAll := ThawMultiple(["Fi*Con"; "DrainChannelSideCon"])
MirrorFilters := Mirror3dAll("yz", [Floc_Origin[0] - L_Floc - W_PlantDC/2 - T_PlantWall; 0 m], "n")
FreezeAll := FreezeMultiple(["Fi*Con"; "DrainChannelSideCon"])
AC_FilterWaterTerminal := stack(FiInletChannelScript, FiTankScript, PlantDrainChannelScript, FiManifoldScript, FiAuxScript, FiSandDrainScript, FiSiphonScript, FiArrayScript, FiWeirScript, FiDistFinishScript, FiSiphonFinishScript, FiBoxDrainFinishScript, FiWaterTerminalScript, FiSandForwardScript)
AC_FilterWaterClean := stack(FiInletChannelScript, FiTankScript, PlantDrainChannelScript, FiManifoldScript, FiAuxScript, FiSandDrainScript, FiSiphonScript, FiArrayScript, FiWeirScript, FiDistFinishScript, FiSiphonFinishScript, FiBoxDrainFinishScript, FiWaterCleanScript, FiSandForwardScript)
AC_FilterWaterBw := stack(FiInletChannelScript, FiTankScript, PlantDrainChannelScript, FiManifoldScript, FiAuxScript, FiSandDrainScript, FiSiphonScript, FiArrayScript, FiWeirScript, FiDistFinishScript, FiSiphonFinishScript, FiBoxDrainFinishScript, FiWaterBwScript, FiSandBwScript)
AC_FilterWater :=
    AC_FilterWaterTerminal if EN_FilterWater == 0
    AC_FilterWaterClean if EN_FilterWater == 1
    AC_FilterWaterBw if EN_FilterWater == 2
AC_Filter :=
    stack(FiInletChannelScript, FiTankScript, PlantDrainChannelScript, FiManifoldScript, FiAuxValves, FiAuxScript, FiSandDrainScript, FiSiphonScript, FiArrayScript, FiWeirScript, FiDistFinishScript, FiSiphonFinishScript, FiBoxDrainFinishScript) if EN_DoubleTrain == 0
    stack(FiInletChannelScript, FiTankScript, FiAuxValves, PlantDrainChannelScript, FiManifoldScript, FiAuxValves, FiAuxScript, FiSmallPipeScript, FiSandDrainScript, FiSiphonScript, FiArrayScript, FiWeirScript, FiDistFinishScript, FiSiphonFinishScript, FiBoxDrainFinishScript, ThawAll, MirrorFilters, FreezeAll) otherwise
AC_Filter :=
    AC_Filter if EN_Water == 0
    AC_FilterWater otherwise
AC_FilterMod := stack(FiInletChannelScriptMod, FiTankScript, FiManifoldScript, FiAuxScript, FiSandDrainScript, FiSiphonScript, FiArrayScript, FiWeirScript, FiDistFinishScript, FiBoxDrainFinishScript)
Check := stack(FiInletChannelScript, FiTankScript, FiSmallPipeScript, FiAuxScript)
FiSiphonAirReleaseFittingsScript, FiSiphonAirReleasePlumbingScript
# [component: inputs AC_Filter]
