Q_Plant := 12*L/s
# [reference: EtFlocSedFi.xmcd]
Lang := stringit_nounits(Language)
LoadTemplate := stack(concat("-layout", sp, "ba", sp, "AguaClara", sp, Lang), "View")
ZoomView := concat("z", sp, "o", sp, "all", sp)
Zoom := concat("zoom", sp, "1/2XP")
RenameBackview := RenameLayout("View", "BackView")
SetBackview := SetLayout(BackView)
BackViewPlant := stack(LoadTemplate, RenameBackview, SetBackview, ".ms", view("ba"), ZoomView, Zoom, "model")
RenameFrontview := RenameLayout("View", "FrontView")
SetFrontview := SetLayout(FrontView)
FrontViewPlant := stack(LoadTemplate, RenameFrontview, SetFrontview, ".ms", view("f"), ZoomView, Zoom, "model")
RenameLeftview := RenameLayout("View", "LeftView")
SetLeftview := SetLayout(LeftView)
LeftViewPlant := stack(LoadTemplate, RenameLeftview, SetLeftview, ".ms", view("l"), ZoomView, Zoom, "model")
RenameRightview := RenameLayout("View", "RightView")
SetRightview := SetLayout(RightView)
RightViewPlant := stack(LoadTemplate, RenameRightview, SetRightview, ".ms", view("ri"), ZoomView, Zoom, "model")
SectionCut(Point1, Point2, Direction, SectionName, Point3, Angle1, LayerName, Angle2) :=
    SwitchSpace ← concat("layout", sp, "s", sp, "model", sp)
    FreezeAll ← FreezeLayer("*")
    SectionLayer ← layer_new(SectionName, blue)
    DrawSection ← concat("Sectionplane", sp, "D")
    Point1 ← concat(point(Point1))
    Point2 ← concat(point(Point2))
    Direction ← concat(point(Direction))
    Thaw ← concat("laythw")
    SelectSection ← concat("Select", sp, "L")
    SectionPlanetoBlock ← concat("SPTB", sp, "last", Enter)
    Rotation ← stringit_nounits(Angle1/deg)
    InsertionPoint ← stack(point(Point3), "1", "1", Rotation)
    LayerOff ← LayerOff(LayerName)
    Flip ← stack("Rotate3D", "L", Enter, "y", "0,0,0", stringit_nounits(Angle2/deg))
    return stack(SwitchSpace, FreezeAll, SectionLayer, DrawSection, Point1, Point2, Enter, Direction, Thaw, SelectSection, sp, SectionPlanetoBlock, InsertionPoint, LayerOff, Flip)
# LONGITUDINAL
# The Longitudinal cuts are contained within this area. Each cut is explained and defined.
# 1) Just above the entrance tank upper wall (outside of the plant) - looking downward (negative y direction) inwards into the plant
Long11 := [Plant_Origin[0] + T_PlantWall; Plant_Origin[1] - T_PlantWall; Plant_Origin[2]]
Long21 := [
    Plant_Origin[0] + Fi_origin[0] - L_Fi - T_FiWall - 30 cm;
    Plant_Origin[1] - T_PlantWall;
    Plant_Origin[2]
]
Angle11 := 0 deg
Dir1L := [Et_Origin[0]; Et_Origin[1] + W_Et; Et_Origin[2]]
InsertionPoint1L := [20 m; Plant_Origin[1]; Plant_Origin[2]]
Angle12 := 0.0001 deg
SectCut1L := SectionCut(Long11, Long21, Dir1L, "Longitudinal One", InsertionPoint1L, Angle11, "Longitudinal One", Angle12)
# 2) Entrance tank (through the center of the drainage pipes) - looking upward (positive y direction)
Long12 := [
    Plant_Origin[0];
    Et_Origin[1] - T_PlantWall + L_EtSupport + T_ChannelWall + S_Fitting + ConRadius(ND_EtDrain);
    Et_Origin[2]
]
Long22 := [
    Et_Origin[0] - L_Et;
    Et_Origin[1] - T_PlantWall + L_EtSupport + T_ChannelWall + S_Fitting + ConRadius(ND_EtDrain);
    Et_Origin[2]
]
Angle21 := 0 deg
Dir2L := [Et_Origin[0]; Et_Origin[1] + W_Et; Et_Origin[2]]
InsertionPoint2L := [-20 m; Plant_Origin[1]; Plant_Origin[2]]
Angle22 := 180 deg
SectCut12L := SectionCut(Long12, Long22, Dir1L, "Longitudinal Two", InsertionPoint1L, Angle21, "Longitudinal Two", Angle22)
# 3) Walkway between entrance tank and flocculator (center) - looking upward
Long13 := [Floc_Origin[0]; Floc_Origin[1] + W_Floc + T_PlantWall + Z_Walkway/2; Floc_Origin[2]]
Long23 := [
    Floc_Origin[0] - L_Floc - T_PlantWall - Z_Walkway/2;
    Floc_Origin[1] + W_Floc + T_PlantWall + Z_Walkway/2;
    Floc_Origin[2]
]
Angle31 := 0 deg
Dir13 := [Et_Origin[0]; Et_Origin[1]; Et_Origin[2]]
InsertionPoint13 := [-20 m; Plant_Origin[1]; Plant_Origin[2]]
Angle32 := 180 deg
SectCut13L := SectionCut(Long13, Long23, Dir13, "Longitudinal Three", InsertionPoint13, Angle31, "Longitudinal Three", Angle32)
# 4) Flocculator (center of a channel, avoiding cutting chem barrels and plumbing off-center if possible) - looking upward
Long14 := [
    Floc_Origin[0];
    Floc_Origin[1] + (N_FlocChannels - 1)*W_FlocChannel + (N_FlocChannels - 1)*T_FlocChannelWall + W_FlocChannel/2;
    Floc_Origin[2]
]
Long24 := [
    Floc_Origin[0] - L_Floc - T_PlantWall;
    Floc_Origin[1] + (N_FlocChannels - 1)*W_FlocChannel + (N_FlocChannels - 1)*T_FlocChannelWall + W_FlocChannel/2;
    Floc_Origin[2]
]
Angle41 := 0 deg
Dir14 := [Et_Origin[0]; Et_Origin[1]; Et_Origin[2]]
InsertionPoint14 := [-20 m; Plant_Origin[1]; Plant_Origin[2]]
Angle42 := 180 deg
Layeroff14L := stack(LayerOff("FlocModSpacerPlu"), LayerOff("FlocModCapPlu"), LayerOff("FlocModPipePlu"), LayerOff("FlocModConnectPipePlu"), LayerOff("FlocModCouplingPlu"), LayerOff("EtCon"), LayerOff("EtDrainCouplingsPlu"), LayerOff("EtDrainPipesPlu"), LayerOff("EtDrainPipesPlu"), LayerOff("EtDrainStoppersPlu"), LayerOff("EtDrainValveGripPlu"), LayerOff("EtDrainValveMetalPlu"), LayerOff("EtFlowControlAdapterPlu"), LayerOff("EtFlowControlFittingPlu"), LayerOff("EtFlowControlPipePlu"), LayerOff("EtFlowControlValvePlu"), LayerOff("EtInletFittingPlu"), LayerOff("EtInletPipePlu"), LayerOff("EtOverflowFittingPlu"), LayerOff("EtOverflowPipePlu"), LayerOff("EtTrashrack"), LayerOff("OpWalkwayCon"))
SectCut14L := SectionCut(Long14, Long24, Dir14, "Longitudinal Four", InsertionPoint14, Angle41, "Longitudinal Four", Angle42)
SectCut14Lf := stack(SectCut14, Layeroff14)
# 5) Sedimentation tank (down the center of a bay - try to the choose one that cuts the filter in an informative way) - looking upward
Long15 := [
    Plant_Origin[0] + T_PlantWall;
    Plant_Origin[1] + (N_SedTanks - 1)*W_SedBay + (N_SedTanks - 1)*T_SedWallDivider + W_SedBay/2;
    Plant_Origin[2]
]
Long25 := [
    Floor_Dim[0];
    Plant_Origin[1] + (N_SedTanks - 1)*W_SedBay + (N_SedTanks - 1)*T_SedWallDivider + W_SedBay/2;
    Plant_Origin[2]
]
Angle51 := 0 deg
Dir15 := [Et_Origin[0]; Et_Origin[1]; Et_Origin[2]]
InsertionPoint15 := [-20 m; Plant_Origin[1]; Plant_Origin[2]]
Angle52 := 180 deg
LayeroffFloc := stack(LayerOff("FlocTankCon"), LayerOff("FlocModSpacerPlu"), LayerOff("FlocModPipePlu"), LayerOff("FlocModCouplingPlu"), LayerOff("FlocModConnectPipePlu"), LayerOff("FlocModCapPlu"), LayerOff("FlocModBaffles"), LayerOff("FlocDrainAdapterPlu"), LayerOff("FlocDrainCouplingPlu"), LayerOff("FlocDrainPipePlu"), LayerOff("FlocDrainValveGripPlu"), LayerOff("FlocDrainValveMetalPlu"), LayerOff("FlocDrainValvePlu"), LayerOff("FlocOrificePlateRod"), LayerOff("FlocRMCouplingPlu"), LayerOff("FlocRMOrificePlate"), LayerOff("FlocRMPlateHolder"), LayerOff("OPWalkwayCon"), LayerOff("DrainChannelCon"))
LayeroffEt := stack(LayerOff("EtCon"), LayerOff("EtDrainCouplingsPlu"), LayerOff("EtDrainPipesPlu"), LayerOff("EtDrainStoppersPlu"), LayerOff("EtDrainValveGripPlu"), LayerOff("EtDrainValveMetalPlu"), LayerOff("EtFlowControlAdapterPlu"), LayerOff("EtFlowControlFittingPlu"), LayerOff("EtFlowControlPipePlu"), LayerOff("EtInletFittingPlu"), LayerOff("EtInletPipePlu"), LayerOff("EtOverflowFittingPlu"), LayerOff("EtOverflowPipePlu"), LayerOff("EtTrashrack"), LayerOff("EtRmElbowPlu"), LayerOff("EtRmPipePlu"), LayerOff("EtFlowControlValvePlu"))
SectCut15L := SectionCut(Long15, Long25, Dir15, "Longitudinal Five", InsertionPoint15, Angle51, "Longitudinal Five", Angle52)
SectCut15Lf := stack(SectCut15, LayeroffFloc, LayeroffEt)
# 6) Filter (through the center of the overflow box if there are two filters) - looking upward
Long16 := [FiOverflowBox_Origin[0]; FiOverflowBox_Origin[1] + W_FiOverflow/2; FiOverflowBox_Origin[2]]
Long26 := [
    FiOverflowBox_Origin[0] - L_FiOverflow;
    FiOverflowBox_Origin[1] + W_FiOverflow/2;
    FiOverflowBox_Origin[2]
]
Angle61 := 0 deg
InsertionPoint16 := [-20 m; Plant_Origin[1]; Plant_Origin[2]]
Dir16 := [Et_Origin[0]; Et_Origin[1]; Et_Origin[2]]
Angle62 := 180 deg
SectCut16L := SectionCut(Long16, Long26, Dir16, "Longitudinal Six", InsertionPoint16, Angle61, "Longitudinal Six", Angle62)
# 7) Sedimentation tank with plates (down the center of the bay) - looking upward
Long17 := [Plant_Origin[0] + T_PlantWall; Plant_Origin[1] + W_SedBay/2; Plant_Origin[2]]
Long27 := [Plant_Origin[0] - L_Sed - T_PlantWall - Z_Walkway/2; Plant_Origin[1] + W_SedBay/2; Plant_Origin[2]]
Angle71 := 0 deg
Dir17 := [Et_Origin[0]; Et_Origin[1]; Et_Origin[2]]
InsertionPoint17 := [-20 m; Plant_Origin[1]; Plant_Origin[2]]
Angle72 := 180 deg
SectCut17L := SectionCut(Long17, Long27, Dir17, "Longitudinal Seven", InsertionPoint17, Angle71, "Longitudinal Seven", Angle72)
LayeroffFloc := stack(LayerOff("FlocTankCon"), LayerOff("FlocModSpacerPlu"), LayerOff("FlocModPipePlu"), LayerOff("FlocModCouplingPlu"), LayerOff("FlocModConnectPipePlu"), LayerOff("FlocModCapPlu"), LayerOff("FlocModBaffles"), LayerOff("FlocDrainAdapterPlu"), LayerOff("FlocDrainCouplingPlu"), LayerOff("FlocDrainPipePlu"), LayerOff("FlocDrainValveGripPlu"), LayerOff("FlocDrainValveMetalPlu"), LayerOff("FlocDrainValvePlu"), LayerOff("FlocOrificePlateRod"), LayerOff("FlocRMCouplingPlu"), LayerOff("FlocRMOrificePlate"), LayerOff("FlocRMPlateHolder"), LayerOff("OPWalkwayCon"), LayerOff("DrainChannelCon"))
LayeroffEt := stack(LayerOff("EtCon"), LayerOff("EtDrainCouplingsPlu"), LayerOff("EtDrainPipesPlu"), LayerOff("EtDrainStoppersPlu"), LayerOff("EtDrainValveGripPlu"), LayerOff("EtDrainValveMetalPlu"), LayerOff("EtFlowControlAdapterPlu"), LayerOff("EtFlowControlFittingPlu"), LayerOff("EtFlowControlPipePlu"), LayerOff("EtInletFittingPlu"), LayerOff("EtInletPipePlu"), LayerOff("EtOverflowFittingPlu"), LayerOff("EtOverflowPipePlu"), LayerOff("EtTrashrack"), LayerOff("EtRmElbowPlu"), LayerOff("EtRmPipePlu"), LayerOff("EtFlowControlValvePlu"))
LayeroffFi := stack(LayerOff("FiAuxFittingPlu"), LayerOff("FiAuxPipePlu"), LayerOff("FiAuxRemovablePlu"), LayerOff("FiBaffles"), LayerOff("FiBallValveGripMetalPlu"), LayerOff("FiBallValveMetalPlu"), LayerOff("FiCon"), LayerOff("FiDistFittingPlu"), LayerOff("FiDistPipePlu"), LayerOff("FiDrainValveGripPlu"), LayerOff("FiDrainValveMetalPlu"), LayerOff("FiEntExitBoxCon"), LayerOff("FiFerncoCouplingsPlu"), LayerOff("FiFittingsPlu"), LayerOff("FiInletChannelCon"), LayerOff("FiInletFittingsPlu"), LayerOff("FiInletPipePlu"), LayerOff("FiManBranchPlu"), LayerOff("FiManCapPlu"), LayerOff("FiManPipePlu"), LayerOff("FiPipePlu"), LayerOff("FiRemovablePlu"), LayerOff("FiSandDrainPlu"), LayerOff("FiTankCon"), LayerOff("FiValvePlu"))
LayeroffCdc := stack(LayerOff("CdcAll"), LayerOff("CdcCalColumnPlu"), LayerOff("CdcCalColumnStand"), LayerOff("CdcColumnCapsPlu"), LayerOff("CdcFittings"), LayerOff("CdcFloatCapPlu"), LayerOff("CdcFloatPipePlu"), LayerOff("CdcLayer"), LayerOff("Cdcsliders"))
SectCut17Lf := stack(SectCut17, LayeroffFloc, LayeroffEt, LayeroffFi, LayeroffCdc)
# 8) Just below the last sed tank wall (outside of the plant) - looking upward (inwards into the plant)
Long18 := [Plant_Origin[0] + T_PlantWall; Et_Origin[1] + T_PlantWall; Plant_Origin[2]]
Long28 := [
    Plant_Origin[0] + Fi_origin[0] - L_Fi - T_FiWall - 30 cm;
    Et_Origin[1] + T_PlantWall;
    Plant_Origin[2]
]
Angle81 := 0 deg
Dir18 := [Plant_Origin[0]; Plant_Origin[1]; Plant_Origin[2]]
InsertionPoint18 := [-20 m; Plant_Origin[1]; Plant_Origin[2]]
Angle82 := 180 deg
SectCut18L := SectionCut(Long18, Long28, Dir18, "Longitudinal Eight", InsertionPoint18, Angle81, "Longitudinal Eight", Angle82)
# TRANSVERSAL
# The Transversal cuts are contained within this area. Each cut is explained and defined.
# 1) To the left of the filter’s outside wall (outside of the plant) - looking to the right (inwards into the plant)
LongT1 := [
    Plant_Origin[0] + Fi_origin[0] - L_Fi - T_FiWall - 30 cm;
    Plant_Origin[1] - T_PlantWall;
    Plant_Origin[2]
]
LongT22 := [
    Plant_Origin[0] + Fi_origin[0] - L_Fi - T_FiWall - 30 cm;
    Et_Origin[1] + T_PlantWall + W_Et;
    Plant_Origin[2]
]
AngleT11 := 0 deg
DirT1 := [Plant_Origin[0]; Plant_Origin[1]; Plant_Origin[2]]
InsertionPointT1 := [-20 m; Plant_Origin[1]; Plant_Origin[2]]
AngleT12 := 180 deg
SectCut11T := SectionCut(LongT1, LongT22, DirT1, "Transversal One", InsertionPointT1, AngleT11, "Transversal One", AngleT12)
# 2) Inside the filter box (through the center of a branch) - looking left (negative x direction)
LongT2 := [Fi_origin[0] - L_Fi/2; Fi_origin[1] - T_FiWall; Fi_origin[2]]
LongT22 := [Fi_origin[0] - L_Fi/2; Fi_origin[1] + W_Fi + T_FiWall; Fi_origin[2]]
AngleT21 := 0 deg
DirT2 := [Plant_Origin[0] + Floor_Dim[0]; Plant_Origin[1]; Plant_Origin[2]]
InsertionPointT2 := [20 m; Plant_Origin[1]; Plant_Origin[2]]
AngleT22 := 0.0001 deg
SectCut12T := SectionCut(LongT2, LongT22, DirT2, "Transversal Two", InsertionPointT2, AngleT21, "Transversal Two", AngleT22)
# 3) Between the filter box and the filter’s exit box (avoid cutting the vertical siphon pipe or cut it down the center, if possible avoid cutting chemical tanks and plumbing off center) - looking left
LongT3 := [FiSiphonTee2_Origin[0] + ShortTeeLength(ND_FiSiphon); Fi_origin[1] - T_FiWall; Fi_origin[2]]
LongT33 := [FiSiphonTee2_Origin[0] + ShortTeeLength(ND_FiSiphon); Fi_origin[1] + W_Fi + T_FiWall; Fi_origin[2]]
AngleT31 := 0 deg
DirT3 := [Plant_Origin[0] + Floor_Dim[0]; Plant_Origin[1]; Plant_Origin[2]]
InsertionPointT3 := [-20 m; Plant_Origin[1]; Plant_Origin[2]]
AngleT32 := 180 deg
SectCut13T := SectionCut(LongT3, LongT33, DirT3, "Transversal Three", InsertionPointT3, AngleT31, "Transversal Three", AngleT32)
# 4) Inside the filter’s entrance box (through the center of the most distance entrance pipes or to the right of them) - looking left
LongT4 := [
    FiEntranceBox_origin[0] - L_FiEntrance + L_FiOverflowWeir - (ConRadius(ND_FiTrunk) + S_Fitting);
    FiEntranceBox_origin[1];
    FiEntranceBox_origin[2]
]
LongT24 := [
    FiEntranceBox_origin[0] - L_FiEntrance + L_FiOverflowWeir - (ConRadius(ND_FiTrunk) + S_Fitting);
    FiEntranceBox_origin[1] + W_FiEntrance;
    FiEntranceBox_origin[2]
]
AngleT41 := 0 deg
DirT4 := [
    FiEntranceBox_origin[0] - L_FiEntrance;
    FiEntranceBox_origin[1] + W_FiEntrance;
    FiEntranceBox_origin[2]
]
InsertionPointT4 := [-20 m; Plant_Origin[1]; Plant_Origin[2]]
AngleT42 := 180 deg
SectCut14T := SectionCut(LongT4, LongT24, DirT4, "Transversal Four", InsertionPointT4, AngleT41, "Transversal Four", AngleT42)
# 5) Drain channel (through the center of the siphon pipe exits or to the right of them, avoid cutting into the sed tank drain valves if possible) - looking left
LongT5 := [FiSiphonChannelPipe_Origin[0]; Floor_Dim[1] - T_PlantWall; Plant_Origin[2]]
LongT25 := [FiSiphonChannelPipe_Origin[0]; Plant_Origin[1] - T_PlantWall; Plant_Origin[2]]
DirT5 := [Fi_origin[0]; Fi_origin[1]; Fi_origin[2]]
AngleT51 := 0 deg
InsertionPointT5 := [-20 m; Plant_Origin[1]; Plant_Origin[2]]
AngleT52 := 180 deg
SectCut15T := SectionCut(LongT5, LongT25, DirT5, "Transversal Five", InsertionPointT5, AngleT51, "Transversal Five", AngleT52)
# 6) Center of the first hopper of the entrance tank (should take care of flocculator and sed tank transversal cuts) - looking left
LongT6 := [
    (Et_Origin[0] - L_EtHopper - T_EtHopperLedge) - S_Fitting - ConRadius(ND_EtDrain);
    Floor_Dim[1] - T_PlantWall;
    Plant_Origin[2]
]
LongT26 := [
    (Et_Origin[0] - L_EtHopper - T_EtHopperLedge) - S_Fitting - ConRadius(ND_EtDrain);
    Plant_Origin[1] - T_PlantWall;
    Plant_Origin[2]
]
AngleT61 := 0 deg
DirT6 := [Fi_origin[0]; Fi_origin[1]; Fi_origin[2]]
InsertionPointT6 := [-20 m; InsertionPointT2[1]; InsertionPointT2[2]]
AngleT62 := 180 deg
SectCut16T := SectionCut(LongT6, LongT26, DirT6, "Transversal Six", InsertionPointT6, AngleT61, "Transversal Six", AngleT62)
LayeroffFi := stack(LayerOff("FiAuxFittingPlu"), LayerOff("FiAuxPipePlu"), LayerOff("FiAuxRemovablePlu"), LayerOff("FiBaffles"), LayerOff("FiBallValveGripMetalPlu"), LayerOff("FiBallValveMetalPlu"), LayerOff("FiCon"), LayerOff("FiDistFittingPlu"), LayerOff("FiDistPipePlu"), LayerOff("FiDrainValveGripPlu"), LayerOff("FiDrainValveMetalPlu"), LayerOff("FiEntExitBoxCon"), LayerOff("FiFerncoCouplingsPlu"), LayerOff("FiFittingsPlu"), LayerOff("FiInletChannelCon"), LayerOff("FiInletFittingsPlu"), LayerOff("FiInletPipePlu"), LayerOff("FiManBranchPlu"), LayerOff("FiManCapPlu"), LayerOff("FiManPipePlu"), LayerOff("FiPipePlu"), LayerOff("FiRemovablePlu"), LayerOff("FiSandDrainPlu"), LayerOff("FiTankCon"), LayerOff("FiValvePlu"))
SectCut16Tf := stack(SectCut16T, LayeroffFi)
# 7) To the right of the furthest wall of the sed/floc tanks (outside the plant) - looking left (inwards into the plant)
LongT7 := [Plant_Origin[0] + T_PlantWall; Plant_Origin[1] - T_PlantWall; Plant_Origin[2]]
LongT27 := [Plant_Origin[0] + T_PlantWall; Et_Origin[1] + T_PlantWall + W_Et; Plant_Origin[2]]
AngleT71 := 0 deg
DirT7 := [Fi_origin[0]; Fi_origin[1]; Fi_origin[2]]
InsertionPointT7 := [20 m; Plant_Origin[1]; Plant_Origin[2]]
AngleT72 := 0.0001 deg
SectCut17T := SectionCut(LongT7, LongT27, DirT7, "Transversal Seven", InsertionPointT7, AngleT71, "Transversal Seven", AngleT72)
# Additional graphs
# ad1) To the right of the sedimentation tanks with section cut in the middle - looking right
LongAD11 := [Plant_Origin[0] + T_PlantWall - L_Sed/2; Plant_Origin[1]; Plant_Origin[2]]
LongAD21 := [
    Plant_Origin[0] + T_PlantWall - L_Sed/2;
    Plant_Origin[1] + 3*W_Sed + 2*T_PlantWall;
    Plant_Origin[2]
]
AngleAD11 := 0 deg
DirAD1 := [Plant_Origin[0]; Plant_Origin[1] + 3*W_Sed + 2*T_PlantWall; Plant_Origin[2]]
InsertionPointAD1 := [20 m; InsertionPointT2[1]; InsertionPointT2[2]]
AngleAD12 := 0.0001 deg
SectCutAD1 := SectionCut(LongAD11, LongAD21, DirT7, "Transversal Eight", InsertionPointAD1, AngleAD11, "Transversal Eight", AngleAD12)
LayeroffPartSed := stack(LayerOff("SedRemovablePlu"), LayerOff("SedModCapPlu"), LayerOff("SedPipePlu"), LayerOff("SedModPipePlu"), LayerOff("SedModSpacerPlu"))
SectCutAD1f := stack(SectCutAD1, LayeroffPartSed)
# ad2) Sedimentation tanks with section cut in the middle - looking front
LongAD12 := [Plant_Origin[0]; Plant_Origin[1] + W_Sed; Plant_Origin[2]]
LongAD22 := [Plant_Origin[0] - L_Sed; Plant_Origin[1] + W_Sed; Plant_Origin[2]]
AngleAD21 := 0 deg
DirAD2 := [Plant_Origin[0] - L_Sed; Plant_Origin[1]; Plant_Origin[2]]
InsertionPointAD2 := [-20 m; InsertionPointT2[1]; InsertionPointT2[2]]
AngleAD22 := 180 deg
SectCutAD2 := SectionCut(LongAD12, LongAD22, DirAD2, "Sedimentation Cross Section", InsertionPointAD2, AngleAD21, "Sedimentation Cross Section", AngleAD22)
# OLD LAYOUTS AC FILE
# This area is code from a previous semester that we used to help guide our creation of the SectionCut function. It is merely here as reference.
Lang := stringit_nounits(Language)
SetLayout(Layout) := concat("layout", sp, "s", sp, Layout)
RenameLayout(Original, New) := stack(concat("layout", sp, "r", sp, Original), New)
PrepLayouts := stack("laythw", concat("-layout", sp, "t", sp, "AguaClara", sp, Lang), "View", concat("layout", sp, "d", sp, "Layout1"), concat(sp, "d", sp, "Layout2"))
RenameView := RenameLayout("View", "TopView")
SetTopView := SetLayout("TopView")
# Sed layers - "Sed"
# Filter layers - "Fi"
# Floc Layers - "Floc"
# EntranceTank Layers - "Et"
# Cdc layers - "Cdc"
# rapid mix layers - "RM"
# coagulant tank layers - "Coag"
# chlorine tank layers - "Chlor"
ZoomView := concat("z", sp, "o", sp, "all", sp)
# .ms
TopViewPlant := stack(RenameView, SetTopView, ".ms", ZoomView)
LoadTemplate := stack(concat("-layout", sp, "t", sp, "AguaClara", sp, Lang), "View")
RenameFrontView := RenameLayout("View", "FrontView")
SetFrontView := SetLayout("FrontView")
# ZoomView
FrontViewPlant := stack(LoadTemplate, RenameFrontView, SetFrontView, ".ms", view("f"), ZoomView)
RenameLeftView := RenameLayout("View", "LeftView")
SetLeftView := SetLayout("LeftView")
# ZoomView
LeftViewPlant := stack(LoadTemplate, RenameLeftView, SetLeftView, ".ms", view("l"), ZoomView)
# Layouts of specific pieces
EtLayout := ViewPort(["~Et*"], "Et", Lang)
FlocLayout := ViewPort(["~Floc*"], "Floc", Lang)
SedOpLayout := ViewPort(["~Sed*"; "SedInletStopperPlu"; "SedLaunderCouplingCapPlu"], "RunningSed", Lang)
SedDrainLayout := ViewPort(["~Sed*"], "DrainingSed", Lang)
SedRefillLayout := ViewPort(["~Sed*"; "SedLaunderCouplingCapPlu"], "RefillingSed", Lang)
FiltLayout := ViewPort(["~Fi*"], "Filt", Lang)
CdcLayout := ViewPort(["~Cdc*"], "Cdc", Lang)
# Special Layouts
BaffleModuleLayout := ViewPort(["~FlocMod*"], "FlocModule", Lang)
SedModuleLayout := ViewPort(["~SedMod*"], "SedLamina", Lang)
CoagLayout := ViewPort(["~Coag*"], "Coag", Lang)
ChlorLayout := ViewPort(["~Chlor*"], "Chlor", Lang)
ConcreteLayout := ViewPort(["~*Con"], "Concrete", Lang)
PipingLayout := ViewPort(["~*Plu"], "Plu", Lang)
SpecificLayouts :=
    stack(SedModuleLayout, CoagLayout, ChlorLayout, ConcreteLayout, PipingLayout) if EN_FlocHoriz == 1
    stack(BaffleModuleLayout, SedModuleLayout, CoagLayout, ChlorLayout, ConcreteLayout, PipingLayout) otherwise
DimensionScript :=
    SedTopDimLayer ← layer_new("SedTopDimension", purple)
    AddDim1 ← LinearDim(Plant_Origin, W_Sed, L_Sed + W_Sed, "v")
    AddDim2 ← LinearDim(Plant_Origin, -L_Sed, echannelbox_dim[1] + .5 m, "h")
    AddDim3 ← LinearDim(echannel_origin, echannelbox_dim[1], -W_Sed, "v")
    AddDim4 ← LinearDim(echannel_origin, -echannelbox_dim[0], -W_Sed, "h")
    AddDim5 ← LinearDim(channel_origin, -channelbox_dim[0], -W_Sed, "h")
    SedTopDim ← concat(AddDim1, AddDim2, AddDim3, AddDim4, AddDim5)
    SedSideDimLayer ← layer_new("SedSideDimension", purple)
    SedFrontDimLayer ← layer_new("SedFrontDimension", purple)
    return concat(SedTopDimLayer, SedTopDim, SedSideDimLayer, SedFrontDimLayer)
AC_Layout := stack(PrepLayouts, TopViewPlant, FrontViewPlant, LeftViewPlant, EtLayout, FlocLayout, SedOpLayout, SedDrainLayout, SedRefillLayout, FiltLayout, CdcLayout, SpecificLayouts, concat("layout", sp, "s", sp, "model", sp), [concat("-view", sp, "_SEISO", sp)])
# Need - matrix of points that you would grab the section planes from
SectionNames := ["Floc"; "Sed"; "Sed"; "Sed"; "Sed"; "Sed"; "Sed"; "Sed"; "Sed"; "Sed"; "Sed"; "Sed"; "Sed"; "Sed"; "Sed"; "Sed"]
SectionPoints := [
    InsertionPoint11, Long11, Long21;
    InsertionPoint11, □, □;
    InsertionPoint11, □, □;
    InsertionPoint11, □, □;
    InsertionPoint11, □, □;
    InsertionPoint11, □, □;
    InsertionPoint11, □, □;
    InsertionPoint11, □, □;
    InsertionPoint11, □, □;
    InsertionPoint11, □, □;
    InsertionPoint11, □, □;
    InsertionPoint11, □, □;
    InsertionPoint11, □, □;
    InsertionPoint11, □, □;
    InsertionPoint11, □, □;
    InsertionPoint11, □, □
]  # error: This placeholder is empty.
SetLayout(Layout) := concat("layout", sp, "s", sp, Layout)
SetUpHLayouts(N_Layout) :=
    Layout ← CreateLayout(Num)
    for i ∈ 0 .. last(SectionPoints[:, 2])
        Layout ← CreateLayout(SectionNames[i])
        if a == 1
            Layout ← stack(Layout, SetLayout(SectionNames[i]), VPortErase([0; 0]*m, [10; 7.7]*m), VPortNew(SectionPoints[:, 2][i], SectionPoints[:, 1][i] - SectionPoints[:, 0][i]), ChangeView([
                XStartPoint - D_LfomOrifices/2 + ((floor(L_Paper/OrificeCenterDist)*OrificeCenterDist)*(a - 1));
                YStartPoint
            ], [XStartPoint + L_Border*a; YStartPoint + W_Border]))
        if a > 1
            Layout ← stack(Layout, CreateLayout(Num), SetLayout(Num), VPortErase([0; 0]*m, [10; 7.7]*m), VPortNew([.013; .013]*m, [.013 m + L_Border + D_LfomOrifices/2; W_Border + .013 m]), ChangeView([
                XStartPoint - D_LfomOrifices/2 + (floor(L_Paper/OrificeCenterDist)*OrificeCenterDist)*(a - 1);
                YStartPoint
            ], [XStartPoint + L_Border*a; YStartPoint + W_Border]))
        Num ← Num + 1 m
    return Layout
ReturnToModelSpace := concat("layout", sp, "s", sp, "model", sp)
OldAC_Layout := stack(PrepLayouts, TopViewPlant, FrontViewPlant, LeftViewPlant, EtLayout, FlocLayout, SedOpLayout, SedDrainLayout, SedRefillLayout, FiltLayout, CdcLayout, SpecificLayouts, ReturnToModelSpace, view("se"))
LongitudinalCutsStack := stack(BackViewPlant, SectCut11L, SectCut12L, SectCut13L, SectCut14Lf, SectCut15Lf, SectCut16L, SectCut17Lf, SectCut18L, FrontViewPlant)
TransversalCutsStack := stack(LeftViewPlant, SectCut11T, SectCut12T, SectCut13T, SectCut14T, SectCut15T, SectCut16Tf, SectCut17T, SectCutAD1f, SectCutAD2, RightViewPlant)
AC_SectionCuts := stack(PrepLayouts, LongitudinalCutsStack, TransversalCutsStack)
