Q_Plant := 10*L/s
Mod := 0
# [reference: ExpertInputs.xmcd]
# [reference: MathFunctions.xmcd]
# [reference: PipeDatabase.xmcd]
# [reference: MaterialsDatabase.xmcd]
# [reference: FluidsFunctions.xmcd]
# [reference: SedTankFunctions.xmcd]
# [reference: CdcFunctions.xmcd]
# [reference: LfomFunctions.xmcd]
# [reference: SedimentationTank.xmcd]
# [reference: Flocculator.xmcd]
# [reference: LFOM.xmcd]
# [reference: EntranceTankmrf222TEST.xmcd]
# [reference: SRSFmrf222TEST.xmcd]
# [reference: LinearCdc.xmcd]
# [reference: ChemStorageTanks.xmcd]
# AutoCAD drawing programs:
# Translators:
# These are the codes that take MathCAD outputs and create AutoCAD scripts that are used to draw the plant (formerly Basics)
# [reference: MtoATranslators.xmcd]
# The wrapped MtoA translator contains the functions that the user will want to access. These functions will draw pieces with full functionality - specifying the location, dimension, and orientation of the object. Also, it contains layer control and subtraction capabilities for grouped objects.
# [reference: MtoATranslatorsWrapped.xmcd]
# Drawing functions:
# [reference: ChannelF.xmcd]
# [reference: PlumbingF.xmcd]
# [reference: TankF.xmcd]
# [reference: StairsF.xmcd]
# [reference: DrainChannelF.xmcd]
# AutoCAD Script Files:
# [reference: FlocculatorAC.xmcd]
# Sedimentation Tank Drawing
Mod := 0
# Sedimentation Tank Concrete (excluding lamella support ledge)
# Side Slopes and Launder Support Ledge
SedTankLayer := layer_new("SedTankCon", grey)
SelectSedCon := SelectLayer("SedTankCon")
# Draw as a channel so that it can be arrayed. All side walls at end.
DrawSedTank := ChannelDrawingPlus(Plant_Origin + [-L_Sed; W_SedBay + T_PlantWall; DropSedBottom], [W_SedBay + 2*T_SedWallDivider; L_Sed; H_Sed + DropSedBottom], T_PlantWall, T_SedTankBottomSlab, [270; 0; 0]*deg)
# DropSedBottom subtracted from every term in this variable. 7/2/2014
ConRadius(ND_SedSludgePipe) = 0.0508 m
DistY := W_SedBay/2 - W_SedSludge/2 - T_SedDrainCoverLedge = 0.484784 m
DistZ := Z_SedSideSlopes - H_SedSludge - H_SedDrainCoverTotal = 0.604229 m
AN_actual := atan(DistZ/DistY) = 0.894644
Z_SedSlopesVertex := Z_SedSideSlopes - W_SedBay/2*tan(AN_actual) - DropSedBottom = -0.154747 m
SedSlopePolyline := Pline3D([
    [Plant_Origin[0]; Plant_Origin[1] + W_SedBay; Plant_Origin[2]] + [0 m; T_ConcreteMin; 0 m - DropSedBottom];
    [Plant_Origin[0]; Plant_Origin[1] + W_SedBay; Plant_Origin[2]] + [Plant_Origin[0]; -W_SedBay/2 + W_SedSludge/2; 0 m - DropSedBottom];
    [Plant_Origin[0]; Plant_Origin[1] + W_SedBay; Plant_Origin[2]] + [0 m; -W_SedBay/2 + W_SedSludge/2; H_SedSludge - DropSedBottom];
    [Plant_Origin[0]; Plant_Origin[1] + W_SedBay; Plant_Origin[2]] + [0 m; -W_SedBay/2 + W_SedSludge/2 + T_SedDrainCoverLedge; H_SedSludge - DropSedBottom];
    [Plant_Origin[0]; Plant_Origin[1] + W_SedBay; Plant_Origin[2]] + [
        0 m;
        -W_SedBay/2 + W_SedSludge/2 + T_SedDrainCoverLedge;
        H_SedSludge - DropSedBottom + H_SedDrainCoverTotal
    ];
    [Plant_Origin[0]; Plant_Origin[1] + W_SedBay; Plant_Origin[2]] + [0 m; 0 m; Z_SedSideSlopes - DropSedBottom];
    [Plant_Origin[0]; Plant_Origin[1] + W_SedBay; Plant_Origin[2]] + [0 m; 0 m; Z_SedLamellaBottom - T_SedLamellaLedge];
    [Plant_Origin[0]; Plant_Origin[1] + W_SedBay; Plant_Origin[2]] + [0 m; -T_ConcreteMin; Z_SedLamellaBottom - T_SedLamellaLedge];
    [Plant_Origin[0]; Plant_Origin[1] + W_SedBay; Plant_Origin[2]] + [0 m; -T_ConcreteMin; Z_SedLamellaBottom];
    [Plant_Origin[0]; Plant_Origin[1] + W_SedBay; Plant_Origin[2]] + [0 m; T_ConcreteMin; Z_SedLamellaBottom];
    [Plant_Origin[0]; Plant_Origin[1] + W_SedBay; Plant_Origin[2]] + [0 m; T_ConcreteMin; 0 m - DropSedBottom]
])
Vertex_Origin := [Plant_Origin[0]; Plant_Origin[1] + W_SedBay/2; Z_SedSlopesVertex] = [0; 0.5334; -0.154747] m
# Nore : Drop Sed bottom is NOR subtracted from the Z.SedLamellaBottom pieces because the lamella stays at the same spot even when the bottom drops. mrf222
H_SedSludge = 0.0572326 m
H_SedSludge + H_SedDrainCoverTotal = 0.106648 m
Z_SedSideSlopes - (T_ConcreteMin*tan(AN_SedSlope)) = 0.65129 m
ExtrudeSedSlopes := ExtrudeLast(-L_Sed)
MirrorSedSlopes := Mirror3dLast("zx", [Plant_Origin[0]; Plant_Origin[1] + W_SedBay - W_SedBay/2], "n")
SedLaunderLedge := BoxF([
    0;
    W_SedBay - 1/2*W_SedBay + ConRadius(ND_SedLaunder);
    Z_SedLaunder - ConRadius(ND_SedLaunder) - DropSedBottom
] + Plant_Origin, [
    -2*SocketDepth(ND_SedLaunder);
    W_SedBay - 1/2*W_SedBay - ConRadius(ND_SedLaunder);
    Z_SedLaunder - ConRadius(ND_SedLaunder) - T_ConcreteMin + DropSedBottom
] + Plant_Origin, [0; 0; 0]*deg)
SedFlocWeirLedge := BoxF([
    -L_Sed + L_SedHopper + (W_SedInletChannelPreWeir + T_PlantWall)*(EN_InletChannelGeom == Inlet_FullDepth);
    Plant_Origin[1] + W_SedBay;
    H_SedSludge - DropSedBottom
] + Plant_Origin, [
    -L_Sed + L_SedHopper + (W_SedInletChannelPreWeir + T_PlantWall)*(EN_InletChannelGeom == Inlet_FullDepth) - T_SedWeir;
    Plant_Origin[1];
    Z_SedManifoldPipe
] + Plant_Origin, [0; 0; 0]*deg)
# Does this change anything?
DrainPipeBox := BoxF([
    Plant_Origin[0] - L_Sed + W_SedInletChannelPreWeir + T_SedWeir;
    Plant_Origin[1] + 2*S_Fitting + 2*ConRadius(ND_SedInletChannelDrain);
    Plant_Origin[2] + Z_SedChannelBottom - CouplingLength(ND_SedInletChannelDrain) + 2*SocketDepth(ND_SedInletChannelDrain) - DropSedBottom
], [Plant_Origin[0] - L_Sed; Plant_Origin[1]; Plant_Origin[2] + ConRadius(ND_SedInletChannelDrain)], [0; 0; 0]*deg)
SedSlopeLedgeScript := stack(SedTankLayer, DrawSedTank, SedSlopePolyline, ExtrudeSedSlopes, MirrorSedSlopes, SedLaunderLedge, SedFlocWeirLedge)
# Inlet and Exit Channels
ChannelVertBox := BoxF([
    -L_Sed + W_SedInletChannel + W_SedExitChannel + T_SedWeir;
    W_SedBay + T_PlantWall;
    Z_SedChannelBottom
] + Plant_Origin, [-L_Sed + W_SedInletChannel + W_SedExitChannel + T_SedWeir + T_ChannelWall; -T_PlantWall; H_Sed] + Plant_Origin, [0; 0; 0]*deg)
ChannelHorizBox := BoxF([-L_Sed; W_SedBay + T_PlantWall; Z_SedChannelBottom] + Plant_Origin, [
    -L_Sed + W_SedExitChannel + T_SedWeir + W_SedInletChannel + T_ChannelWall;
    -T_PlantWall;
    Z_SedChannelBottom - T_ChannelWall
] + Plant_Origin, [0; 0; 0]*deg)
H_Sed = 1.75843 m
SedFlocWeirBox := BoxF([Plant_Origin[0] - L_SedUpflow - T_ConcreteMin; Plant_Origin[1] - T_ConcreteMin; Z_SedFlocWeir], [Plant_Origin[0] - L_SedUpflow; Plant_Origin[1] + T_ConcreteMin + W_SedBay; Z_SedManifoldPipe], [0; 0; 0]*deg)
Z_SedChannelBottom = 1.42653 m
Z_SedFlocWeir = 0.860877 m
SedChannelScript := stack(ChannelVertBox, ChannelHorizBox, SedFlocWeirBox)
# Floc Hopper Front and Back Slopes
SedHopperPeak := [
    [
        Plant_Origin[0] - L_Sed;
        Plant_Origin[1];
        Plant_Origin[2] - DropSedBottom + 2*ConRadius(ND_SedSludgePipe)
    ];
    [
        Plant_Origin[0] - L_Sed + L_SedHopper;
        Plant_Origin[1];
        Plant_Origin[2] - DropSedBottom + 2*ConRadius(ND_SedSludgePipe)
    ];
    [Plant_Origin[0] - L_Sed + L_SedHopper; Plant_Origin[1]; Z_SedManifoldPipe - DropSedBottom];
    [
        Plant_Origin[0] - L_Sed + L_SedHopper - T_ConcreteMin;
        Plant_Origin[1];
        Z_SedManifoldPipe - DropSedBottom
    ];
    [
        X_SedHopperBottom;
        Plant_Origin[1];
        Z_SedHopperIntersect - DropSedBottom + 2*ConRadius(ND_SedSludgePipe)
    ];
    [Plant_Origin[0] - L_Sed; Plant_Origin[1]; Z_SedHopperBackSlope - DropSedBottom];
    [
        Plant_Origin[0] - L_Sed;
        Plant_Origin[1];
        Plant_Origin[2] - DropSedBottom + 2*ConRadius(ND_SedSludgePipe)
    ]
] = [
    [-4.33783; 0; -0.0992]; [-3.20368; 0; -0.0992]; [-3.20368; 0; 0.0749011]; [-3.25368; 0; 0.0749011]; [-3.50317; 0; -0.0729858]; [-4.33783; 0; 0.660077]; [-4.33783; 0; -0.0992]
] m
SedHopperFlat := [
    [
        Plant_Origin[0] - L_Sed;
        Plant_Origin[1];
        Plant_Origin[2] - DropSedBottom + 2*ConRadius(ND_SedSludgePipe)
    ];
    [
        Plant_Origin[0] - L_Sed + L_SedHopper;
        Plant_Origin[1];
        Plant_Origin[2] - DropSedBottom + 2*ConRadius(ND_SedSludgePipe)
    ];
    [Plant_Origin[0] - L_Sed + L_SedHopper; Plant_Origin[1]; Z_SedManifoldPipe - DropSedBottom];
    [
        Plant_Origin[0] - L_Sed + L_SedHopper - T_ConcreteMin;
        Plant_Origin[1];
        Z_SedManifoldPipe - DropSedBottom
    ];
    [
        Plant_Origin[0] - L_Sed + L_SedHopper - T_ConcreteMin;
        Plant_Origin[1];
        Z_SedHopperFrontSlope - DropSedBottom
    ];
    [
        Plant_Origin[0] - L_Sed + L_SedHopperBackSlope;
        Plant_Origin[1];
        Z_SedHopperIntersect - DropSedBottom + 2*ConRadius(ND_SedSludgePipe)
    ];
    [Plant_Origin[0] - L_Sed; Plant_Origin[1]; Z_SedHopperBackSlope - DropSedBottom];
    [
        Plant_Origin[0] - L_Sed;
        Plant_Origin[1];
        Plant_Origin[2] - DropSedBottom + 2*ConRadius(ND_SedSludgePipe)
    ]
] = [
    [-4.33783; 0; -0.0992]; [-3.20368; 0; -0.0992]; [-3.20368; 0; 0.0749011]; [-3.25368; 0; 0.0749011]; [-3.25368; 0; 0.0749011]; [-3.38339; 0; -0.0729858]; [-4.33783; 0; 0.660077]; [-4.33783; 0; -0.0992]
] m
# DropSedBottom was subtracted from all of this!
SedHopperPlineMatrix :=
    SedHopperFlat if L_SedHopperFrontSlopeMax + L_SedHopperBackSlope < L_SedHopper - T_ConcreteMin
    SedHopperPeak otherwise
SedHopperPline := Pline3D(SedHopperPlineMatrix)
ExtrudeSedHopper := ExtrudeLast(W_SedBay)
SedHopperScript := stack(SedHopperPline, ExtrudeSedHopper)
FreezeSedTank := FreezeLayer("SedTankCon")
DrainPipeBoxLayer := layer_new("DrainPipeBox", grey)
DrainPipeBoxFrz := FreezeLayer("DrainPipeBox")
SedConScript := stack(SedSlopeLedgeScript, SedChannelScript, SedHopperScript, FreezeSedTank, DrainPipeBoxLayer, DrainPipeBox, DrainPipeBoxFrz)
# Sludge Drain Cover
SedDrainCoverLayer := layer_new("SedDrainCoverCon", ltgrey)
# This WAS it:
Pline3D([
    [
        Plant_Origin[0];
        Plant_Origin[1] + W_SedBay - (W_SedBay + W_SedDrainCover)/2;
        Plant_Origin[2] + H_SedSludge - DropSedBottom
    ];
    [
        Plant_Origin[0];
        Plant_Origin[1] + W_SedBay - (W_SedBay + W_SedDrainCover)/2;
        Plant_Origin[2] + H_SedSludge + H_SedDrainCoverTotal - DropSedBottom
    ];
    [
        Plant_Origin[0];
        Plant_Origin[1] + W_SedBay - W_SedBay/2 - outerradius(ND_SedJetReverser);
        T_ConcreteMin + outerradius(ND_SedJetReverser) + H_SedSludge - DropSedBottom
    ];
    [
        Plant_Origin[0];
        Plant_Origin[1] + W_SedBay - W_SedBay/2 + outerradius(ND_SedJetReverser);
        T_ConcreteMin + outerradius(ND_SedJetReverser) + H_SedSludge - DropSedBottom
    ];
    [
        Plant_Origin[0];
        Plant_Origin[1] + W_SedBay - (W_SedBay - W_SedDrainCover)/2;
        Plant_Origin[2] + H_SedSludge + H_SedDrainCoverTotal - DropSedBottom
    ];
    [
        Plant_Origin[0];
        Plant_Origin[1] + W_SedBay - (W_SedBay - W_SedDrainCover)/2;
        Plant_Origin[2] + H_SedSludge - DropSedBottom
    ];
    [
        Plant_Origin[0];
        Plant_Origin[1] + W_SedBay - (W_SedBay + W_SedDrainCover)/2;
        Plant_Origin[2] + H_SedSludge - DropSedBottom
    ]
])
SedDrainCoverPline := Pline3D([
    [
        Plant_Origin[0];
        Plant_Origin[1] + W_SedBay - (W_SedBay + W_SedDrainCover)/2;
        Plant_Origin[2] + H_SedSludge - DropSedBottom
    ];
    [
        Plant_Origin[0];
        Plant_Origin[1] + W_SedBay - (W_SedBay + W_SedDrainCover)/2;
        Plant_Origin[2] + H_SedSludge + H_SedDrainCoverTotal - DropSedBottom
    ];
    [
        Plant_Origin[0];
        Plant_Origin[1] + W_SedBay - W_SedBay/2 - outerradius(ND_SedJetReverser);
        outerradius(ND_SedJetReverser) + H_SedSludge - DropSedBottom
    ];
    [
        Plant_Origin[0];
        Plant_Origin[1] + W_SedBay - W_SedBay/2 + outerradius(ND_SedJetReverser);
        outerradius(ND_SedJetReverser) + H_SedSludge - DropSedBottom
    ];
    [
        Plant_Origin[0];
        Plant_Origin[1] + W_SedBay - (W_SedBay - W_SedDrainCover)/2;
        Plant_Origin[2] + H_SedSludge + H_SedDrainCoverTotal - DropSedBottom
    ];
    [
        Plant_Origin[0];
        Plant_Origin[1] + W_SedBay - (W_SedBay - W_SedDrainCover)/2;
        Plant_Origin[2] + H_SedSludge - DropSedBottom
    ];
    [
        Plant_Origin[0];
        Plant_Origin[1] + W_SedBay - (W_SedBay + W_SedDrainCover)/2;
        Plant_Origin[2] + H_SedSludge - DropSedBottom
    ]
])
-L_SedUpflow = -3.20368 m
ExtrudeSedDrainCover := ExtrudeLast(-L_SedUpflow)
SedDrainCoverBox := BoxF(Plant_Origin + [0; W_SedBay - (W_SedBay + W_SedDrainCover)/2; H_SedSludge - DropSedBottom], Plant_Origin + [0; W_SedBay - (W_SedBay + W_SedDrainCover)/2; H_SedSludge] + [-L_SedUpflow; W_SedDrainCover; H_SedDrainCoverTotal], [0; 0; 0]*deg)
FreezeSedDrainCover := FreezeLayer("SedDrainCoverCon")
SedJetReverser_Origin == [
    0 m;
    W_SedBay - W_SedBay/2;
    H_SedSludge + T_ConcreteMin - DropSedBottom + outerradius(ND_SedJetReverser)
] + Plant_Origin
SedJetReverser_Origin := [0 m; W_SedBay/2; H_SedSludge - DropSedBottom + outerradius(ND_SedJetReverser)] + Plant_Origin
SedJetRedirect := CylinderF(SedJetReverser_Origin, outerradius(ND_SedJetReverser), L_SedUpflow + zc, [0; 0]*deg)
N_SedDrainCoverSegmentOrifices
SedDrainCoverOrifices := CylinderF([
    -B_SedSludgeOrifices/2;
    W_SedBay - W_SedBay/2;
    H_SedSludge - DropSedBottom + H_SedDrainCoverTotal + zc
] + Plant_Origin, D_SedSludgeOrifice/2, H_SedDrainCoverTotal + 2*zc, [0; 270]*deg)
ArraySedDrainOrifices := ArrayLast(1, N_SedSludgeOrifices, -B_SedSludgeOrifices)
GroupSedDrainCuts := GroupAll("DeleteMe")
SubtractSedDrainCuts := SubtractF(["SedDrainCoverCon"], "DeleteMe")
ThawSedDrainCover := SelectLayer("SedDrainCoverCon")
ArraySedDrainCover1 := ArrayLast(1, N_SedDrainCover, -L_SedDrainCoverSegment - S_SedDrainCoverSegment)
SedDrainCoverScript :=
    stack(SedDrainCoverLayer, SedDrainCoverBox, FreezeSedDrainCover, SedJetRedirect, SedDrainCoverOrifices, ArraySedDrainOrifices, GroupSedDrainCuts, SubtractSedDrainCuts, ThawSedDrainCover, FreezeSedDrainCover) if W_SedDrainCover == outerdiameter(ND_SedJetReverser)
    stack(SedDrainCoverLayer, SedDrainCoverPline, ExtrudeSedDrainCover, FreezeSedDrainCover, SedJetRedirect, SedDrainCoverOrifices, ArraySedDrainOrifices, GroupSedDrainCuts, SubtractSedDrainCuts, ThawSedDrainCover, FreezeSedDrainCover) otherwise
# Inlet Manifold
# Origins and Dimensions
S_FromSedWall := 1 in
# The y and z components of this origin may need to be changed. The manifold must be at least 10 cm from the slope of the sed tank, and the diffusers must be all the way at the left side of the jet reverser.
SedJetReverser_Origin = [0; 0.5334; -0.0991174] m
S_SedInletManSlope = 0.1 m
AN_SedSlope = 0.872665
SedManPipeYOffset := outerradius(ND_SedJetReverser) - outerradius(ND_SedDiffuser) = 0.0277495 m
AN_actual = 0.894644
Z_SedManPipeRequired := Z_SedSlopesVertex + (S_SedInletManSlope + outerradius(ND_SedManifold) + SedManPipeYOffset/sin(AN_actual))/cos(AN_actual)
Z_SedManPipeMin := Z_SedManifoldPipe + S_FromSedWall - DropSedBottom
Z_SedManPipeRequired = 0.196349 m
Z_SedManPipe :=
    Z_SedManPipeRequired if Z_SedManPipeMin < Z_SedManPipeRequired
    Z_SedManPipeMin otherwise
Z_SedManPipeMin = 0.100301 m
Z_SedManPipe - Z_SedSlopesVertex = 0.351096 m
Z_SedManPipe = 0.196349 m
SedManPipe_Origin := [
    Plant_Origin[0] - CapThickness(ND_SedManifold);
    Plant_Origin[1] + W_SedBay/2 + SedManPipeYOffset;
    Z_SedManPipe
]  # Redefinition to move the diffusers over to the left edge of the jet reverser.
SedManPipe_Origin = [-0.0079375; 0.561149; 0.196349] m
outerdiameter(2 in) = 6.0325 cm
SedManElbow_Origin := SedManPipe_Origin - [L_SedManifoldPipe; 0; 0]
SedManCap_Origin := SedManPipe_Origin + [L_SedManifoldPipe; 0 m; 0 m]
# Manifold Pipes
SedPipeLayer := layer_new("SedPipePlu", blue)
SelectSedPipes := SelectLayer("SedPipePlu")
SedPipeFrz := FreezeLayer("SedPipePlu")
SedManPipe := PipeSUBF(SedManPipe_Origin, L_SedManifoldPipe, [0; 0]*deg, ND_SedManifold, PS_Default, ["SedTankCon"])
# y origin points for the rest of the inlet manifold not dependent on the InletManifold horizontla pipe.
# mrf222 7/7/14
# this is the one from serena
SedManPipeScript := stack(SedPipeLayer, SedManPipe, SedPipeFrz)
# Manifold Feet
ND_ManFeet := 1 in
50 deg
AN_SedSlope = 0.872665
H_subtraction := ((Z_SedSideSlopes - H_SedSludge - T_ConcreteMin)*S_FromSedWall)/(W_SedBay/2 + S_FromSedWall) = 0.0274384 m
H_additional := (W_SedDiffuserOutlet/2 - 1.5*T_SedDiffuserWall + S_FromSedWall)/tan(90 deg - AN_SedSlope)
AN_actual = 0.894644
L_LongTriangleLegA := Z_SedManifoldPipe - T_ConcreteMin - H_subtraction
L_LongTriangleLeg := L_SedManifoldDiffuser + innerdiameter(ND_SedManifold, PS_Default)/2 + H_additional + S_FromSedWall
L_ShortTriangleLeg := tan(90 deg - AN_SedSlope)*L_LongTriangleLeg
L_ShortTriangleLegA := (L_LongTriangleLeg*(W_SedBay/2 - outerradius(ND_SedJetReverser) + S_FromSedWall))/(Z_SedSideSlopes - H_SedSludge - T_ConcreteMin)
S_FromManifold := L_ShortTriangleLeg*cos(90 deg - AN_SedSlope)
L_ShortFoot == S_FromManifold - outerradius(ND_SedManifold)
WrongLength := S_SedInletManSlope - (cos(AN_actual)*(Z_SedManPipe - Z_SedSlopesVertex) - SedManPipeYOffset/sin(AN_actual) - outerradius(ND_SedManifold))
WrongMore := ConRadius(ND_SedManifold) - outerradius(ND_SedManifold) = 0.0079375 m
L_ShortFoot := cos(AN_actual)*(Z_SedManPipe - Z_SedSlopesVertex) - SedManPipeYOffset/sin(AN_actual) - outerradius(ND_SedManifold) + WrongMore + .0044 m
L_ShortFoot = 0.112338 m
WrongLength = -1.38778e-17 m
H_additional2 := (-3*T_SedDiffuserWall - S_FromSedWall + 2*outerradius(ND_SedJetReverser) - W_SedDiffuserOutlet/2)/tan(90 deg - AN_SedSlope)
L_LongTriangleLeg2A := Z_SedSideSlopes - H_SedSludge - T_ConcreteMin - H_subtraction
L_LongTriangleLeg2 := innerdiameter(ND_SedManifold, PS_Default)/2 + L_SedManifoldDiffuser + H_additional2 + S_FromSedWall
S_FromManifold2 := cos(AN_SedSlope)*L_LongTriangleLeg2
L_LongFoot == S_FromManifold2 - outerradius(ND_SedManifold)
sin(AN_actual) = 0.779986
cos(AN_actual) = 0.625797
L_LongFoot := cos(AN_actual)*(Z_SedManPipe - Z_SedSlopesVertex) + SedManPipeYOffset/sin(AN_actual) - outerradius(ND_SedManifold) - WrongMore - .0044 m
tan(AN_actual) = 1.24639
L_LongFoot = 0.158816 m
outerradius(ND_SedManifold) + L_ShortFoot
Y_1 := (outerradius(ND_SedManifold) + L_ShortFoot)*sin(AN_actual)
Y_2 := (outerradius(ND_SedManifold) + L_LongFoot)*sin(AN_actual)
Z_1 := (outerradius(ND_SedManifold) + L_ShortFoot)*cos(AN_actual)
Z_2 := (outerradius(ND_SedManifold) + L_LongFoot)*cos(AN_actual)
ManFeetLayer := layer_new("SedModManFeet", red)
ManFeetLong_OriginPoint := [
    SedManPipe_Origin[0] + CapDiameter(ND_SedManifold)/2 - outerradius(ND_SedManifold) - CapHeight(ND_SedManifold) - ND_ManFeet;
    SedManPipe_Origin[1] - Y_2;
    SedManPipe_Origin[2] - Z_2
]
ManFeetShort_OriginPoint := [ManFeetLong_OriginPoint[0]; SedManPipe_Origin[1] + Y_1; SedManPipe_Origin[2] - Z_1]
ManFeetShort_OriginPoint = [-0.1524; 0.714397; 0.0733952] m
ManFeetLong_OriginPoint = [-0.1524; 0.371649; 0.0443089] m
ManFeetLong := PipeF(ManFeetLong_OriginPoint, L_LongFoot, [-AN_actual; 90 deg], ND_ManFeet, PS_Default)
ManFeetShort := PipeF(ManFeetShort_OriginPoint, L_ShortFoot, [180 deg - AN_actual; -90 deg], ND_ManFeet, PS_Default)
Loc_Feet := Plant_Origin[0] - L_SedUpflow + T_PlantWall + ND_ManFeet
ManFeetLayerFrz := FreezeLayer("SedModManFeet")
S_SedPipe := .25 in  # Subject to change, not specified in report
Y_3 := (outerradius(ND_SedManifold) + S_SedPipe)*sin(AN_SedSlope)
Y_4 := (outerradius(ND_SedManifold) + S_SedPipe)*cos(90 deg - AN_SedSlope)
Z_3 := (outerradius(ND_SedManifold) + S_SedPipe)*cos(AN_SedSlope)
Z_4 := (outerradius(ND_SedManifold) + S_SedPipe)*sin(90 deg - AN_SedSlope)
R_Hole := .25 in
HoleLongFoot_OriginPoint := [ManFeetLong_OriginPoint[0]; SedManPipe_Origin[1] - Y_3 + 2 in; SedManPipe_Origin[2] - Z_3 - 2 in]
HoleShortFoot_OriginPoint := [ManFeetLong_OriginPoint[0]; SedManPipe_Origin[1] + Y_4 - 2 in; SedManPipe_Origin[2] - Z_4 - 2 in]
DrawHole1 := CylinderF(HoleLongFoot_OriginPoint, R_Hole, 4 in, [180 deg - AN_SedSlope; -90 deg])
DrawHole2 := CylinderF(HoleShortFoot_OriginPoint, R_Hole, 4 in, [-AN_SedSlope; 90 deg])
SubtractHole := SubtractF(["SedModManFeet"], "DeleteMe")
# Hose Clamps:
LayerHoseClamp := layer_new("SedModHoseClamp", purple)
T_Clamp := 1/8*in
L_Clamp := .25 in
R_Clamp := outerradius(ND_SedManifold) + R_Hole + S_SedPipe
HoseClamp_Origin := [ManFeetLong_OriginPoint[0]; SedManPipe_Origin[1]; SedManPipe_Origin[2]]
HoseClampOuter := CylinderF(HoseClamp_Origin, R_Clamp + T_Clamp, L_Clamp, [0; 0]*deg)
FrzLayerHoseClamp := FreezeLayer("SedModHoseClamp")
HoseClampInner := CylinderF(HoseClamp_Origin, R_Clamp, L_Clamp, [0; 0]*deg)
SubtractInner := SubtractF(["SedModHoseClamp"], "DeleteMe")
DrawHoseClamps := stack(LayerHoseClamp, HoseClampOuter, FrzLayerHoseClamp, HoseClampInner, GroupDelete, SubtractInner, DrawHole1, DrawHole2, GroupDelete, SubtractHole)
SelectHoseClamps := SelectLayer("SedModHoseClamp")
SelectFeet := SelectLayer("SedModManFeet")
ArrayFeet := array_all(1, 2, Loc_Feet)
ManFeetScript := stack(ManFeetLayer, ManFeetLong, ManFeetShort, ManFeetLayerFrz, DrawHoseClamps, SelectHoseClamps, SelectFeet, ArrayFeet, FrzLayerHoseClamp, ManFeetLayerFrz)
# Manifold Fittings
SedFittingLayer := layer_new("SedFittingPlu", green)
SelectSedFittings := SelectLayer("SedFittingPlu")
SedFittingFrz := FreezeLayer("SedFittingPlu")
SedManElbow := ElbowSUBF(SedManElbow_Origin, [90; 0; 270]*deg, ND_SedManifold, PS_Default, ["SedTankCon"])
SedManCap := CapF(SedManPipe_Origin, [0; 0; 0]*deg, ND_SedManifold)
SedManFittingScript == {
    stack(SedFittingLayer, SedManCap, SedManElbow, SedManVertCoupling, SedFittingFrz) if EN_SedChannelCoupling == 1
    stack(SedFittingLayer, SedManCap, SedManElbow, SedFittingFrz) otherwise
}
SedManFittingScript := stack(SedFittingLayer, SedManCap, SedManElbow, SedFittingFrz)
# Manifold Orifices
SedManOrifice := CylinderF([
    Plant_Origin[0] - L_Sed + L_SedHopper + L_SedDiffuserOutlet/2 + T_SedDiffuserWall + (W_SedInletChannelPreWeir + T_ChannelWall)*(EN_InletChannelGeom == Inlet_FullDepth);
    SedManPipe_Origin[1];
    SedManPipe_Origin[2]
], D_SedManifoldPort/2, ND_SedManifold, [0; 270]*deg)
ArraySedManOrifice := array_all(1, N_SedManifoldPorts, B_SedManifoldPort)
# Air Vent Holes
SedManAirVent := CylinderF([
    Plant_Origin[0] - 2*N_AirVentHoles*B_AirVentHoles;
    SedManPipe_Origin[1];
    SedManPipe_Origin[2] + outerradius(ND_SedManifold) + ND_SedManifold/4
], D_AirVentHoles/2, ND_SedManifold/2, [0; 270]*deg)
ArraySedManAirVent := array_all(1, N_AirVentHoles, B_AirVentHoles)
SubtractFromSedPipes := SubtractF(["SedPipePlu"], "DeleteMe")
SubtractFromSedFittings := SubtractF(["SedFittingPlu"], "DeleteMe")
SedManOrificeScript := stack(SedManOrifice, ArraySedManOrifice, SedManAirVent, ArraySedManAirVent, GroupDelete, SubtractFromSedPipes, SedManOrifice, ArraySedManOrifice, SedManAirVent, ArraySedManAirVent, GroupDelete, SubtractFromSedFittings)
SedManifoldScript := stack(SedManPipeScript, SedManFittingScript, SedManOrificeScript, ManFeetScript)
# Exit Launder
# Origins and Dimensions
SedLaunderPipe_Origin :=
    if T_ChannelWall > CouplingLength(ND_SedLaunder)
        [
            Plant_Origin[0] - L_SedChannelToWall + max(0 m, 2*CouplingLength(ND_SedLaunder) - T_ChannelWall) - SocketDepth(ND_SedLaunder);
            W_SedBay - 1/2*W_SedBay + Plant_Origin[1];
            Z_SedLaunder
        ]
    otherwise
        [
            Plant_Origin[0] - L_SedChannelToWall - T_ChannelWall + CouplingLength(ND_SedLaunder) - SocketDepth(ND_SedLaunder);
            W_SedBay - 1/2*W_SedBay + Plant_Origin[1];
            Z_SedLaunder
        ]
SedLaunderCap_Origin := SedLaunderPipe_Origin + [L_SedLaunder; 0 m; 0 m]
SedLaunderCoupling1_Origin := [
    Plant_Origin[0] - L_Sed + W_SedExitChannel + W_SedInletChannel + T_SedWeir + SocketDepth(ND_SedLaunder);
    W_SedBay - 1/2*W_SedBay + Plant_Origin[1];
    Z_SedLaunder
]
SedLaunderCoupling2_Origin := [
    Plant_Origin[0] - L_SedChannelToWall + max(0 m, 2*CouplingLength(ND_SedLaunder) - T_ChannelWall) - SocketDepth(ND_SedLaunder);
    W_SedBay - 1/2*W_SedBay + Plant_Origin[1];
    Z_SedLaunder
]
SedLaunderNipple_Origin := SedLaunderCoupling1_Origin + [CouplingLength(ND_SedLaunder) - 2*SocketDepth(ND_SedLaunder); 0 m; 0 m]
# Launder Fittings
SedLaunderEndCap := CapF(SedLaunderCap_Origin, [0; 0]*deg, ND_SedLaunder)
SedLaunderPlugCap := CapF([
    Plant_Origin[0] - L_SedChannelToWall - T_ChannelWall - CapHeight(ND_SedLaunder) + CapThickness(ND_SedLaunder);
    W_SedBay - 1/2*W_SedBay + Plant_Origin[1];
    Z_SedLaunder
], [180; 0]*deg, ND_SedLaunder)
SedLaunderCoupling1 := CouplingSUBF(SedLaunderCoupling1_Origin, [0; 180]*deg, ND_SedLaunder, PS_Default, ["SedTankCon"])
SedLaunderCoupling2 := CouplingSUBF(SedLaunderCoupling2_Origin, [0; 0]*deg, ND_SedLaunder, PS_Default, ["SedTankCon"])
SedLaunderRemovableLayer := layer_new("SedLaunderRemovablePlu", red)
SelectLaunderSedRemovables := SelectLayer("SedLaunderRemovablePlu")
SedLaunderRemovableFrz := FreezeLayer("SedLaunderRemovablePlu")
SedLaunderFittingScript :=
    stack(SelectSedFittings, SedLaunderEndCap, SedLaunderCoupling1, SedFittingFrz, SedLaunderRemovableLayer, SedLaunderPlugCap, SedLaunderRemovableFrz) if CouplingLength(ND_SedLaunder) ≥ T_ChannelWall
    stack(SelectSedFittings, SedLaunderEndCap, SedLaunderCoupling1, SedLaunderCoupling2, SedFittingFrz, SedLaunderRemovableLayer, SedLaunderPlugCap, SedLaunderRemovableFrz) otherwise
# Launder Pipes
SedLaunderPipe := PipeF(SedLaunderPipe_Origin, L_SedLaunder, [0; 180]*deg, ND_SedLaunder, PS_Default)
SedLaunderPlugNipple := PipeF([
    Plant_Origin[0] - L_SedChannelToWall - T_ChannelWall + L_SedLaunderCapExcess;
    W_SedBay - 1/2*W_SedBay + Plant_Origin[1];
    Z_SedLaunder
], CapHeight(ND_SedLaunder) - CapThickness(ND_SedLaunder) + L_SedLaunderCapExcess, [0; 0]*deg, ND_SedLaunder, PS_Default)
SedLaunderNipple := PipeSUBF(SedLaunderNipple_Origin, T_ChannelWall - 2*CouplingLength(ND_SedLaunder) + 2*SocketDepth(ND_SedLaunder), [0; 180]*deg, ND_SedLaunder, PS_Default, ["SedTankCon"])
SedLaunderPipeScript :=
    stack(SelectSedPipes, SedLaunderPipe, SedPipeFrz, SelectLaunderSedRemovables, SedLaunderPlugNipple, SedLaunderRemovableFrz) if CouplingLength(ND_SedLaunder) ≥ T_ChannelWall
    stack(SelectSedPipes, SedLaunderPipe, SedLaunderNipple, SedPipeFrz, SelectLaunderSedRemovables, SedLaunderPlugNipple, SedLaunderRemovableFrz) otherwise
# Launder Orifices
SedLaunderOrifice := CylinderF([SocketDepth(ND_SedLaunder) + 1/2*B_SedLaunderOrifices; 0 m; 0 m] + SedLaunderPipe_Origin, D_SedLaunderOrifice/2, ND_SedLaunder, [0; 90]*deg)
ArraySedLaunderOrifices := array_all(1, N_SedLaunderOrifices, B_SedLaunderOrifices)
SedLaunderOrificeScript := stack(SedLaunderOrifice, ArraySedLaunderOrifices, GroupDelete, SubtractFromSedPipes, SedLaunderOrifice, ArraySedLaunderOrifices, GroupDelete, SubtractFromSedFittings)
SedLaunderScript := stack(SedLaunderFittingScript, SedLaunderPipeScript, SedLaunderOrificeScript)
# Floc Hopper Drain
# Origins
SedHopperDrainAdapter1_Origin := Plant_Origin + [
    -L_Sed - T_PlantWall - SocketDepth(ND_SedHopperDrain);
    W_SedBay/2;
    Z_SedHopperIntersect + outerradius(ND_SedHopperDrain) - DropSedBottom + 2*ConRadius(ND_SedSludgePipe)
]
SedHopperDrainValve_Origin := SedHopperDrainAdapter1_Origin + [
    -MaleAdapterLength(ND_SedHopperDrain) + ValveSocket(ND_SedHopperDrain) + SocketDepth(ND_SedHopperDrain);
    0 m;
    0 m
]
SedHopperDrainAdapter2_Origin := SedHopperDrainValve_Origin + [
    ValveSocket(ND_SedHopperDrain) - ValveLength(ND_SedHopperDrain) + SocketDepth(ND_SedHopperDrain) - MaleAdapterLength(ND_SedHopperDrain);
    0 m;
    0 m
]
SedHopperDrainElbow_Origin := SedHopperDrainAdapter2_Origin + [-2*SocketDepth(ND_SedHopperDrain); 0 m; 0 m]
SedHopperDrainCoupling_Origin := SedHopperDrainAdapter1_Origin + [CouplingLength(ND_SedHopperDrain); 0 m; 0 m]
SedHopperDrainPipe_Origin := [
    X_SedHopperBottom;
    SedHopperDrainCoupling_Origin[1];
    Z_SedHopperIntersect + outerradius(ND_SedHopperDrain) - DropSedBottom + 2*ConRadius(ND_SedSludgePipe)
]  # what is this and why is it not dependent on the above origins?
# Hopper Drain Pipes
SedHopperDrainNipple1 := PipeF(SedHopperDrainAdapter1_Origin + [2*SocketDepth(ND_SedHopperDrain); 0; 0], 2*SocketDepth(ND_SedHopperDrain), [0; 0]*deg, ND_SedHopperDrain, PS_Default)
SedHopperDrainNipple2 := PipeF(SedHopperDrainAdapter2_Origin, 2*SocketDepth(ND_SedHopperDrain), [0; 0]*deg, ND_SedHopperDrain, PS_Default)
L_SedHopperDrainPipe := X_SedHopperBottom - (Plant_Origin[0] - L_Sed - T_PlantWall + CouplingLength(ND_SedHopperDrain) - SocketDepth(ND_SedHopperDrain))
SedHopperDrainPipe := PipeSUBF(SedHopperDrainPipe_Origin, L_SedHopperDrainPipe, [0; 0]*deg, ND_SedHopperDrain, PS_Default, ["SedTankCon"])
SedHopperDrainPipeWedge := WedgeF([0; outerradius(ND_SedHopperDrain); outerradius(ND_SedHopperDrain)] + SedHopperDrainPipe_Origin, [
    -2*outerradius(ND_SedHopperDrain)/tan(AN_SedHopperSlope);
    -outerradius(ND_SedHopperDrain);
    -outerradius(ND_SedHopperDrain)
] + SedHopperDrainPipe_Origin, [0; 0; 0])
SubtractSedHopperDrainPipeWedge := SubtractF(["SedPipePlu"], "DeleteMe")
SedHopperDrainPipeScript := stack(SelectSedPipes, SedHopperDrainNipple1, SedHopperDrainNipple2, SedHopperDrainPipe, SedPipeFrz, SedHopperDrainPipeWedge, GroupDelete, SubtractSedHopperDrainPipeWedge)
# Hopper Drain Fittings
SedValveLayer := layer_new("SedValvePlu", blue3)
SelectSedValves := SelectLayer("SedValvePlu")
SedValveFrz := FreezeLayer("SedValvePlu")
SedAdapterLayer := layer_new("SedAdapterPlu", blue2)
SelectSedAdapters := SelectLayer("SedAdapterPlu")
SedAdapterFrz := FreezeLayer("SedAdapterPlu")
SedHopperDrainCoupling := CouplingSUBF(SedHopperDrainCoupling_Origin, [0; 0]*deg, ND_SedHopperDrain, PS_Default, ["SedTankCon"])
SedHopperDrainElbow := ElbowF(SedHopperDrainElbow_Origin, [90; 0; 45]*deg, ND_SedHopperDrain, PS_Default)
SedHopperDrainAdapter1 := MaleAdapterF(SedHopperDrainAdapter1_Origin, [0; 0]*deg, ND_SedHopperDrain, PS_Default)
SedHopperDrainAdapter2 := MaleAdapterF(SedHopperDrainAdapter2_Origin, [180; 0]*deg, ND_SedHopperDrain, PS_Default)
SedHopperDrainValve := insertdwg("https://confluence.cornell.edu/download/attachments/173604905/Sed-Scaled-Gate-Valve-Threaded.dwg", SedHopperDrainValve_Origin, 2*outerradius(ND_SedHopperDrain)/(1.16 m), 2*outerradius(ND_SedHopperDrain)/(1.16 m), 0 deg)
SedHopperDrainFittingScript := stack(SelectSedFittings, SedHopperDrainCoupling, SedFittingFrz, SedValveLayer, SedHopperDrainValve, SedValveFrz, SedAdapterLayer, SedHopperDrainAdapter1, SedHopperDrainAdapter2, SedAdapterFrz, SelectSedFittings, SedHopperDrainElbow, SedFittingFrz)
SedHopperDrainScript := stack(SedHopperDrainPipeScript, SedHopperDrainFittingScript)
# Sludge Drain Plumbing
# Origins and Dimensions
SedSludgeDrainCoupling_Origin := [
    CouplingLength(ND_SedSludgePipe) - SocketDepth(ND_SedSludgePipe) - T_PlantWall - L_Sed;
    W_SedBay/2;
    H_SedSludge - outerradius(ND_SedSludgePipe) - DropSedBottom
] + Plant_Origin
SedSludgeDrainPipe_Origin := Plant_Origin + [
    -L_Sed + L_SedHopper + T_ConcreteMin;
    W_SedBay/2;
    H_SedSludge - outerradius(ND_SedSludgePipe) - DropSedBottom
]
# the ten centimeters to ensure you can wrap your hand between two valves
L_SedSludgeValvePipe := -(SedHopperDrainElbow_Origin[0] - ElbowRadius(ND_SedHopperDrain) - ConRadius(ND_SedHopperDrain)) + (Plant_Origin[0] - L_Sed - T_PlantWall) + 10 cm
L_SedSludgeEmbeddedPipe := L_SedHopper + T_SedWeir + T_PlantWall - CouplingLength(ND_SedSludgePipe) + SocketDepth(ND_SedSludgePipe)
SedSludgeDrainAdapter1_Origin := Plant_Origin + [
    -L_Sed - T_PlantWall + SocketDepth(ND_SedSludgePipe) - L_SedSludgeValvePipe;
    W_SedBay/2;
    H_SedSludge - outerradius(ND_SedSludgePipe) - DropSedBottom
]
SedSludgeDrainValve_Origin := SedSludgeDrainAdapter1_Origin + [
    -MaleAdapterLength(ND_SedSludgePipe) + SocketDepth(ND_SedSludgePipe) + ValveSocket(ND_SedSludgePipe);
    0 m;
    0 m
]
# Sludge Drain Pipes
SedSludgeValvePipe := PipeF(SedSludgeDrainAdapter1_Origin + [L_SedSludgeValvePipe; 0; 0], L_SedSludgeValvePipe, [0; 0]*deg, ND_SedSludgePipe, PS_Default)
SedSludgePipe := PipeSUBF(SedSludgeDrainPipe_Origin, L_SedSludgeEmbeddedPipe, [0; 0]*deg, ND_SedSludgePipe, PS_Default, ["SedTankCon"])
SedSludgeDrainPipeScript := stack(SelectSedPipes, SedSludgePipe, SedSludgeValvePipe, SedPipeFrz)
# Sludge Drain Fittings
SedSludgeDrainAdapter1 := MaleAdapterF(SedSludgeDrainAdapter1_Origin, [0; 0]*deg, ND_SedSludgePipe, PS_Default)
SedSludgeDrainValve := insertdwg("https://confluence.cornell.edu/download/attachments/173604905/Sed-Scaled-Gate-Valve-Threaded.dwg", SedSludgeDrainValve_Origin, 2*outerradius(ND_SedSludgePipe)/(1.16 m), 2*outerradius(ND_SedSludgePipe)/(1.16 m), 0 deg)
SedSludgeCoupling := CouplingSUBF(SedSludgeDrainCoupling_Origin, [0; 0]*deg, ND_SedSludgePipe, PS_Default, ["SedTankCon"])
SedSludgeDrainFittingScript := stack(SelectSedAdapters, SedSludgeDrainAdapter1, SedAdapterFrz, SelectSedValves, SedSludgeDrainValve, SedValveFrz, SelectSedFittings, SedSludgeCoupling, SedFittingFrz)
SedSludgeDrainScript := stack(SedSludgeDrainPipeScript, SedSludgeDrainFittingScript)
# Lamella
# Origins and Dimensions
Lamina_Origin := [
    Plant_Origin[0] - cos(AN_SedPlate)*L_SedPlate;
    Plant_Origin[1];
    Z_SedLamellaBottom + Plant_Origin[2]
]
SedModCap_Origin := Lamina_Origin + [
    ConRadius(ND_SedModulePipe)*cos(AN_SedPlate) - CapThickness(ND_SedModulePipe)*sin(AN_SedPlate) + CapHeight(ND_SedModulePipe)/sin(AN_SedPlate);
    S_Fitting + ConRadius(ND_SedModulePipe);
    ConRadius(ND_SedModulePipe)*sin(AN_SedPlate) + CapThickness(ND_SedModulePipe)*cos(AN_SedPlate)
]
SedModMirrorLineX := SedModCap_Origin[0] - (CapHeight(ND_SedModulePipe) - CapThickness(ND_SedModulePipe))*sin(AN_SedPlate) + (L_SedPlate - B_SedPlate*(N_SedModulePlates - 1)/tan(AN_SedPlate) - 2*(SedModCap_Origin[2] + (CapHeight(ND_SedModulePipe) - CapThickness(ND_SedModulePipe))*cos(AN_SedPlate) - Lamina_Origin[2])/sin(AN_SedPlate))*cos(AN_SedPlate)/2
SedModMirrorLineZ := SedModCap_Origin[2] + (CapHeight(ND_SedModulePipe) - CapThickness(ND_SedModulePipe))*cos(AN_SedPlate) + (L_SedPlate - B_SedPlate*(N_SedModulePlates - 1)/tan(AN_SedPlate) - 2*(SedModCap_Origin[2] + (CapHeight(ND_SedModulePipe) - CapThickness(ND_SedModulePipe))*cos(AN_SedPlate) - Lamina_Origin[2])/sin(AN_SedPlate))*sin(AN_SedPlate)/2
# Lamella
SedLaminaLayer := layer_new("SedModLamella", purple)
MakeSedLamina := BoxF(Lamina_Origin, Lamina_Origin + [-T_SedPlate; W_SedBay; L_SedPlate], [0; 90 deg - AN_SedPlate; 0])
ArraySedLamina := ArrayLast(1, N_SedModulePlates, -B_SedPlate/sin(AN_SedPlate))
SedLaminaFrz := FreezeLayer("SedModLamella")
SedLaminaScript := stack(SedLaminaLayer, MakeSedLamina, ArraySedLamina, SedLaminaFrz)
# Module Connector Caps
SedModCapLayer := layer_new("SedModCapPlu", red)
SedModCapRight := CapF(SedModCap_Origin, [0; 0; 0], ND_SedModulePipe)
SedModCapLeft := CapF(SedModCap_Origin - [
    B_SedPlate*(N_SedModulePlates - 1) + T_SedPlate + 2*(CapHeight(ND_SedModulePipe) - ConRadius(ND_SedModulePipe) + outerradius(ND_SedModulePipe));
    0 m;
    0 m
], [0; 180 deg; 0], ND_SedModulePipe)
SedModCapFrz := FreezeLayer("SedModCapPlu")
SedModCapScript := stack(SedModCapLayer, SedModCapRight, SedModCapLeft, SedModCapFrz)
# Module Connector Pipes and Spacers
SedModPipeLayer := layer_new("SedModPipePlu", blue3)
SedModPipe := PipeF(SedModCap_Origin, B_SedPlate*(N_SedModulePlates - 1) + T_SedPlate + 2*(CapHeight(ND_SedModulePipe) - ConRadius(ND_SedModulePipe) + outerradius(ND_SedModulePipe)), [0; 0; 0], ND_SedModulePipe, PS_Modules)
SedModPipeFrz := FreezeLayer("SedModPipePlu")
SedModSpacerLayer := layer_new("SedModSpacerPlu", blue)
SedModSpacers := PipeF(SedModCap_Origin - [CapHeight(ND_SedModulePipe) + T_SedPlate - CapThickness(ND_SedModulePipe); 0; 0], B_SedPlate - T_SedPlate, [0; 0; 0], ND_SedModulePipeSpacer, PS_Modules)
ArraySedModSpacers := ArrayLast(1, N_SedModulePlates - 1, -B_SedPlate)
SedModSpacerFrz := FreezeLayer("SedModSpacerPlu")
SedModPipeScript := stack(SedModPipeLayer, SedModPipe, SedModPipeFrz, SedModSpacerLayer, SedModSpacers, ArraySedModSpacers, SedModSpacerFrz)
# Rotate and Array Connectors and Array Modules
ThawSedModPiping := ThawMultiple(["SedMod*Plu"])
RotateSedModPiping := Rotate_All([SedModCap_Origin[0]; SedModCap_Origin[2]; SedModCap_Origin[1]], AN_SedPlate - 90 deg)
MirrorSedModPipingUp := MirrorAll([SedModMirrorLineX; SedModMirrorLineZ], [SedModMirrorLineX; SedModMirrorLineZ] + [zc; -zc/tan(AN_SedPlate)], "n")
TripleSedModPiping := array_all(3, 1, (W_SedPlate - 2*(S_Fitting + ConRadius(ND_SedModulePipe)))/2)
ThawSedModLamella := ThawMultiple(["SedModLamella"])
ArraySedMod := array_all(1, N_SedModules, -B_SedPlate*N_SedModulePlates/sin(AN_SedPlate))
FreezeSedModComponents := FreezeMultiple(["SedMod*"])
SedModArrayScript := stack(ThawSedModPiping, view("f"), RotateSedModPiping, MirrorSedModPipingUp, view("t"), TripleSedModPiping, ThawSedModLamella, ArraySedMod, FreezeSedModComponents)
# Plate Settler Support Pipes
SedSupportAFSpace := 1.3 m
SedSupportPipeND := 2 in
N_SedSupportCrossPipe := ceil(L_Sed/SedSupportAFSpace)
SedSupportSpace := L_Sed/N_SedSupportCrossPipe
outerdiameter(SedSupportPipeND) = 0.060325 m
SedSupportLayer := layer_new("SedModSupportPlu", yellow)
SedSupportPipeND = 0.0508 m
SedSupportPipeTrans1 := PipeSUBF([
    Plant_Origin[0] - SedSupportPipeND/2 - SedSupportSpace;
    Plant_Origin[1];
    Z_SedLamellaBottom - SedSupportPipeND/2
], W_SedBay/2 - TeeLength(SedSupportPipeND) - SocketDepth(SedSupportPipeND), [-90; 0]*deg, SedSupportPipeND, PS_Default, ["SedTankCon"])
SedSupportHolesLayer := layer_new("SedSupportHoles", purple)
SedSupportHoles1 := BoxF([
    Plant_Origin[0] - SedSupportPipeND/2 - outerradius(SedSupportPipeND) - SedSupportSpace;
    Plant_Origin[1] + T_ConcreteMin;
    Z_SedLamellaBottom - SedSupportPipeND/2
], [
    Plant_Origin[0] - SedSupportPipeND/2 + outerradius(SedSupportPipeND) - SedSupportSpace;
    Plant_Origin[1];
    Z_SedLamellaBottom
], [0; 0; 0]*deg)
SedSubtractSupportHoles := SubtractF(["SedTankCon"], "DeleteMe")
SedSupportHolesClose := FreezeLayer("SedSupportHoles")
SedSupportPipeTrans2 := PipeSUBF([
    Plant_Origin[0] - SedSupportPipeND/2 - SedSupportSpace;
    Plant_Origin[1] + T_ConcreteMin + (W_Sed/2 - T_ConcreteMin - SocketDepth(SedSupportPipeND));
    Z_SedLamellaBottom - SedSupportPipeND/2
], 2*SocketDepth(SedSupportPipeND), [-90; 0]*deg, SedSupportPipeND, PS_Default, ["SedTankCon"])
SedSupportPipeTrans3 := PipeSUBF([
    Plant_Origin[0] - SedSupportPipeND/2 - SedSupportSpace;
    Plant_Origin[1] + T_ConcreteMin + (W_Sed - 2*T_ConcreteMin)/2 + TeeLength(SedSupportPipeND) + SocketDepth(SedSupportPipeND);
    Z_SedLamellaBottom - SedSupportPipeND/2
], W_SedBay/2 - TeeLength(SedSupportPipeND) - SocketDepth(SedSupportPipeND), [-90; 0]*deg, SedSupportPipeND, PS_Default, ["SedTankCon"])
SedSupportHoles3 := BoxF([
    Plant_Origin[0] - SedSupportPipeND/2 - outerradius(SedSupportPipeND) - SedSupportSpace;
    Plant_Origin[1] + W_SedBay - T_ConcreteMin;
    Z_SedLamellaBottom - SedSupportPipeND/2
], [
    Plant_Origin[0] - SedSupportPipeND/2 + outerradius(SedSupportPipeND) - SedSupportSpace;
    Plant_Origin[1] + W_SedBay;
    Z_SedLamellaBottom
], [0; 0; 0]*deg)
SedSupportPipeTransArray := ArrayLast(1, N_SedSupportCrossPipe - 2, -SedSupportSpace)
SedSupportPipeTransMiddle := stack(SedSupportLayer, SedSupportPipeTrans1, SedSupportPipeTransArray, SedSupportPipeTrans2, SedSupportPipeTransArray, SedSupportPipeTrans3, SedSupportPipeTransArray)
SedSupportHolesMiddle := stack(SedSupportHolesLayer, SedSupportHoles1, SedSupportPipeTransArray, SedSupportHoles3, SedSupportPipeTransArray, GroupDelete, SedSubtractSupportHoles, SedSupportHolesClose)
SedSupportPipeTransFront := stack(PipeSUBF([Plant_Origin[0] - SedSupportPipeND/2; Plant_Origin[1]; Z_SedLamellaBottom - SedSupportPipeND/2], W_SedBay/2 - TeeLength(SedSupportPipeND) - SocketDepth(SedSupportPipeND), [-90; 0]*deg, SedSupportPipeND, PS_Default, ["SedTankCon"]), PipeSUBF([
    Plant_Origin[0] - SedSupportPipeND/2;
    Plant_Origin[1] + T_ConcreteMin + ((W_Sed - 2*T_ConcreteMin)/2 - SocketDepth(SedSupportPipeND));
    Z_SedLamellaBottom - SedSupportPipeND/2
], W_Sed/2 + SocketDepth(SedSupportPipeND), [-90; 0]*deg, SedSupportPipeND, PS_Default, ["SedTankCon"]))
SedSupportHolesFront := stack(BoxF([
    Plant_Origin[0] - outerradius(SedSupportPipeND) - SedSupportPipeND/2;
    Plant_Origin[1];
    Z_SedLamellaBottom - SedSupportPipeND/2
], [
    Plant_Origin[0] + outerradius(SedSupportPipeND) - SedSupportPipeND/2;
    Plant_Origin[1] + T_ConcreteMin;
    Z_SedLamellaBottom
], [0; 0; 0]*deg), BoxF([
    Plant_Origin[0] - outerradius(SedSupportPipeND) - SedSupportPipeND/2;
    Plant_Origin[1] + W_SedBay - T_ConcreteMin;
    Z_SedLamellaBottom - SedSupportPipeND/2
], [
    Plant_Origin[0] - SedSupportPipeND/2 + outerradius(SedSupportPipeND);
    Plant_Origin[1] + W_SedBay;
    Z_SedLamellaBottom
], [0; 0; 0]*deg))
SedSupportHolesFrontScript := stack(SelectLayer("SedSupportHoles"), SedSupportHolesFront, GroupDelete, SedSubtractSupportHoles, SedSupportHolesClose)
SedSupportPipeTransEnd :=
    Script ← SelectLayer("SedModSupportPlu")
    for i ∈ N_SedSupportCrossPipe
        if mod(i, 2) == 1
            SedSupportPipeTrans ← stack(PipeSUBF([
                Plant_Origin[0] - SedSupportPipeND/2 - (i - 1)*SedSupportSpace;
                Plant_Origin[1];
                Z_SedLamellaBottom - SedSupportPipeND/2
            ], W_SedBay/2 + SocketDepth(SedSupportPipeND), [-90; 0]*deg, SedSupportPipeND, PS_Default, ["SedTankCon"]), PipeSUBF([
                Plant_Origin[0] - SedSupportPipeND/2 - (i - 1)*SedSupportSpace;
                Plant_Origin[1] + T_ConcreteMin + W_Sed/2 - T_ConcreteMin + TeeLength(SedSupportPipeND) + SocketDepth(SedSupportPipeND);
                Z_SedLamellaBottom - SedSupportPipeND/2
            ], W_Sed/2 - TeeLength(SedSupportPipeND), [-90; 0]*deg, SedSupportPipeND, PS_Default, ["SedTankCon"]))
        otherwise
            SedSupportPipeTrans ← stack(PipeSUBF([
                Plant_Origin[0] - SedSupportPipeND/2 - (i - 1)*SedSupportSpace;
                Plant_Origin[1];
                Z_SedLamellaBottom - SedSupportPipeND/2
            ], W_SedBay/2 - TeeLength(SedSupportPipeND) - SocketDepth(SedSupportPipeND), [-90; 0]*deg, SedSupportPipeND, PS_Default, ["SedTankCon"]), PipeSUBF([
                Plant_Origin[0] - SedSupportPipeND/2 - (i - 1)*SedSupportSpace;
                Plant_Origin[1] + T_ConcreteMin + ((W_Sed - 2*T_ConcreteMin)/2 - SocketDepth(SedSupportPipeND));
                Z_SedLamellaBottom - SedSupportPipeND/2
            ], W_Sed/2 + SocketDepth(SedSupportPipeND), [-90; 0]*deg, SedSupportPipeND, PS_Default, ["SedTankCon"]))
        Script ← stack(Script, SedSupportPipeTrans)
    return Script
SedSupportHolesEndScript :=
    Script ← SelectLayer("SedSupportHoles")
    for i ∈ N_SedSupportCrossPipe
        SedSupportHolesEnd ← stack(BoxF([
            Plant_Origin[0] - outerradius(SedSupportPipeND) - SedSupportPipeND/2 - (i - 1)*SedSupportSpace;
            Plant_Origin[1];
            Z_SedLamellaBottom - SedSupportPipeND/2
        ], [
            Plant_Origin[0] - SedSupportPipeND/2 + outerradius(SedSupportPipeND) - (i - 1)*SedSupportSpace;
            Plant_Origin[1] + T_ConcreteMin;
            Z_SedLamellaBottom
        ], [0; 0; 0]*deg), BoxF([
            Plant_Origin[0] - outerradius(SedSupportPipeND) - SedSupportPipeND/2 - (i - 1)*SedSupportSpace;
            Plant_Origin[1] + W_SedBay - T_ConcreteMin;
            Z_SedLamellaBottom - SedSupportPipeND/2
        ], [
            Plant_Origin[0] - SedSupportPipeND/2 + outerradius(SedSupportPipeND) - (i - 1)*SedSupportSpace;
            Plant_Origin[1] + W_SedBay;
            Z_SedLamellaBottom
        ], [0; 0; 0]*deg))
        Script ← stack(Script, SedSupportHolesEnd, GroupDelete, SedSubtractSupportHoles, SedSupportHolesClose)
    return Script
SedSupportPipeLong :=
    Script ← SelectLayer("SedModSupportPlu")
    for i ∈ 1 .. N_SedSupportCrossPipe - 1
        if mod(i, 2) == 1
            SedSupportPipeLong ← PipeF([
                Plant_Origin[0] - SedSupportPipeND/2 - TeeLength(SedSupportPipeND)/2 - (i - 1)*SedSupportSpace;
                Plant_Origin[1] + W_Sed/2 - TeeLength(SedSupportPipeND)/2 - SocketDepth(SedSupportPipeND);
                Z_SedLamellaBottom - SedSupportPipeND/2
            ], SedSupportSpace - TeeLength(SedSupportPipeND), [0; 0]*deg, SedSupportPipeND, PS_Default)
        otherwise
            SedSupportPipeLong ← PipeF([
                Plant_Origin[0] - SedSupportPipeND/2 - TeeLength(SedSupportPipeND)/2 - (i - 1)*SedSupportSpace;
                (Plant_Origin[1] + W_Sed/2 + TeeLength(SedSupportPipeND)/2) + SocketDepth(SedSupportPipeND);
                Z_SedLamellaBottom - SedSupportPipeND/2
            ], SedSupportSpace - TeeLength(SedSupportPipeND), [0; 0]*deg, SedSupportPipeND, PS_Default)
        Script ← stack(Script, SedSupportPipeLong)
    return Script
SedSupportTees :=
    Script ← layer_new("SedModSupportTees", green)
    for i ∈ 1 .. N_SedSupportCrossPipe - 1
        if mod(i, 2) == 1
            SedSupportTees ← stack(TeeF([
                Plant_Origin[0] - SedSupportPipeND/2 - TeeLength(SedSupportPipeND)/2 - (i - 1)*SedSupportSpace;
                Plant_Origin[1] + W_Sed/2 - TeeLength(SedSupportPipeND)/2 - SocketDepth(SedSupportPipeND);
                Z_SedLamellaBottom - SedSupportPipeND/2
            ], [90; 0; 0]*deg, SedSupportPipeND, PS_Default), Mirror3dLast("yz", [
                Plant_Origin[0] - SedSupportPipeND/2 - (i - 1)*SedSupportSpace - SedSupportSpace/2;
                Plant_Origin[1] + W_Sed/2 - TeeLength(SedSupportPipeND)/2 - SocketDepth(SedSupportPipeND);
                Z_SedLamellaBottom - SedSupportPipeND/2
            ], "n"))
        otherwise
            SedSupportTees ← stack(TeeF([
                Plant_Origin[0] - SedSupportPipeND/2 - TeeLength(SedSupportPipeND)/2 - (i - 1)*SedSupportSpace;
                (Plant_Origin[1] + W_Sed/2) + TeeLength(SedSupportPipeND)/2 + SocketDepth(SedSupportPipeND);
                Z_SedLamellaBottom - SedSupportPipeND/2
            ], [90; 0; 0]*deg, SedSupportPipeND, PS_Default), Mirror3dLast("yz", [
                Plant_Origin[0] - SedSupportPipeND/2 - (i - 1)*SedSupportSpace - SedSupportSpace/2;
                Plant_Origin[1] + W_Sed/2 - TeeLength(SedSupportPipeND)/2 - SocketDepth(SedSupportPipeND);
                Z_SedLamellaBottom - SedSupportPipeND/2
            ], "n"))
        Script ← stack(Script, SedSupportTees)
    return Script
SedSupportPipe := stack(SedSupportHolesMiddle, SedSupportPipeTransMiddle, SedSupportPipeTransFront, FreezeLayer("SedModSupportPlu"), SedSupportHolesEndScript, SedSupportHolesFrontScript, SedSupportPipeTransEnd, FreezeLayer("SedModSupportPlu"), SedSupportPipeLong, FreezeLayer("SedModSupportPlu"))
SedSupportTeeConnections := stack(SedSupportTees, FreezeLayer("SedModSupportTees"))
SedSupport := stack(SedSupportPipe, SedSupportTeeConnections)
SedLamellaScript := stack(SedLaminaScript, SedModCapScript, SedModPipeScript, SedModArrayScript, SedSupport)
# Complete A Single Sed Tank (array and add walls) (diffusers added later since they are not arrayed)
ThawSedBayArray := ThawMultiple(["Sed*"])
ArraySedBay := array_all(N_SedBays, 1, W_SedBay)
FreezeSedBayArray := FreezeMultiple(["Sed*"])
ArraySedBayScript := stack(ThawSedBayArray, FreezeSedModComponents, ArraySedBay, FreezeSedBayArray)
SedWallUnderChannel := BoxF([0 m; W_Sed; 0 m - DropSedBottom] + Plant_Origin, [
    -L_Sed + Plant_Origin[0];
    W_Sed + T_SedWallDivider + Plant_Origin[1];
    Z_SedChannelBottom - T_ChannelWall + DropSedBottom
], [0; 0; 0]*deg)
SedWallAboveChannel := BoxF([0 m; W_Sed; H_Sed] + Plant_Origin, [
    -L_Sed + W_SedInletChannel + W_SedExitChannel + T_ChannelWall + T_SedWeir;
    W_Sed + T_SedWallDivider;
    H_Sed - Z_SedChannelBottom - T_ChannelWall
] + Plant_Origin, [0; 0; 0]*deg)
SedPlateSupportLedgeScript := stack(SelectSedCon, SedWallUnderChannel, SedWallAboveChannel, FreezeSedTank)
CompleteSedTank :=
    SedPlateSupportLedgeScript if N_SedBays == 1
    stack(ArraySedBayScript, SedPlateSupportLedgeScript) otherwise
# Array Sed Tanks
ThawAllSed := ThawMultiple(["Sed*"])
ArraySedTank := Array_All(N_SedTanks, 1, W_Sed + T_SedWallDivider)
FreezeAllSed := FreezeMultiple(["Sed*"])
SelectSedConcrete := ThawMultiple(["SedTankCon"; "DrainPipeBox"])
SedTankArrayScript := stack(ThawAllSed, FreezeSedModComponents, DrainPipeBoxFrz, ArraySedTank, FreezeAllSed, SelectSedConcrete, BrepAll, Union_All, FreezeSedTank, DrainPipeBoxFrz)
# Inlet Manifold Diffusers
SedDiffuser_Origin := [
    Plant_Origin[0] - L_Sed + L_SedHopper + L_SedDiffuserOutlet/2 + T_SedDiffuserWall + (W_SedInletChannelPreWeir + T_PlantWall)*(EN_InletChannelGeom == Inlet_FullDepth);
    SedManPipe_Origin[1];
    -innerdiameter(ND_SedManifold, PS_Default)/2 + SedManPipe_Origin[2]
]
SedDiffLayer := layer_new("SedManifoldDiffuserPlu", blue)
SedDiffOuterCircleSection := circle([SedDiffuser_Origin[0]; SedDiffuser_Origin[1]; SedDiffuser_Origin[2]], outerradius(ND_SedDiffuser))
SedDiffOuterRectangleSection := Pline3D([
    [
        SedDiffuser_Origin[0] + L_SedDiffuserOutlet/2 + T_SedDiffuserWall;
        SedDiffuser_Origin[1] + W_SedDiffuserOutlet/2 + T_SedDiffuserWall;
        SedDiffuser_Origin[2] - L_SedManifoldDiffuser
    ];
    [
        SedDiffuser_Origin[0] - L_SedDiffuserOutlet/2 - T_SedDiffuserWall;
        SedDiffuser_Origin[1] + W_SedDiffuserOutlet/2 + T_SedDiffuserWall;
        SedDiffuser_Origin[2] - L_SedManifoldDiffuser
    ];
    [
        SedDiffuser_Origin[0] - L_SedDiffuserOutlet/2 - T_SedDiffuserWall;
        SedDiffuser_Origin[1] - W_SedDiffuserOutlet/2 - T_SedDiffuserWall;
        SedDiffuser_Origin[2] - L_SedManifoldDiffuser
    ];
    [
        SedDiffuser_Origin[0] + L_SedDiffuserOutlet/2 + T_SedDiffuserWall;
        SedDiffuser_Origin[1] - W_SedDiffuserOutlet/2 - T_SedDiffuserWall;
        SedDiffuser_Origin[2] - L_SedManifoldDiffuser
    ];
    [
        SedDiffuser_Origin[0] + L_SedDiffuserOutlet/2 + T_SedDiffuserWall;
        SedDiffuser_Origin[1] + W_SedDiffuserOutlet/2 + T_SedDiffuserWall;
        SedDiffuser_Origin[2] - L_SedManifoldDiffuser
    ]
])
SedDiffZoomOuter := ZoomWindow([SedDiffuser_Origin[0] - L_SedDiffuserOutlet; SedDiffuser_Origin[1] + W_SedDiffuserOutlet], [SedDiffuser_Origin[0] + L_SedDiffuserOutlet; SedDiffuser_Origin[1] - W_SedDiffuserOutlet])
SedDiffOuterLoft := Loft([SedDiffuser_Origin[0] + outerradius(ND_SedDiffuser); SedDiffuser_Origin[1]; SedDiffuser_Origin[2]], [
    SedDiffuser_Origin[0] + L_SedDiffuserOutlet/2 + T_SedDiffuserWall;
    SedDiffuser_Origin[1] + W_SedDiffuserOutlet/2 + T_SedDiffuserWall;
    SedDiffuser_Origin[2] - L_SedManifoldDiffuser
])
SedDiffuserFreeze := FreezeLayer("SedManifoldDiffuserPlu")
SedDiffInnerCircleSection := circle([SedDiffuser_Origin[0]; SedDiffuser_Origin[1]; SedDiffuser_Origin[2]], innerdiameter(ND_SedDiffuser, PS_Default)/2)
SedDiffInnerRectangleSection := Pline3D([
    [
        SedDiffuser_Origin[0] + L_SedDiffuserOutlet/2;
        SedDiffuser_Origin[1] + W_SedDiffuserOutlet/2;
        SedDiffuser_Origin[2] - L_SedManifoldDiffuser
    ];
    [
        SedDiffuser_Origin[0] - L_SedDiffuserOutlet/2;
        SedDiffuser_Origin[1] + W_SedDiffuserOutlet/2;
        SedDiffuser_Origin[2] - L_SedManifoldDiffuser
    ];
    [
        SedDiffuser_Origin[0] - L_SedDiffuserOutlet/2;
        SedDiffuser_Origin[1] - W_SedDiffuserOutlet/2;
        SedDiffuser_Origin[2] - L_SedManifoldDiffuser
    ];
    [
        SedDiffuser_Origin[0] + L_SedDiffuserOutlet/2;
        SedDiffuser_Origin[1] - W_SedDiffuserOutlet/2;
        SedDiffuser_Origin[2] - L_SedManifoldDiffuser
    ];
    [
        SedDiffuser_Origin[0] + L_SedDiffuserOutlet/2;
        SedDiffuser_Origin[1] + W_SedDiffuserOutlet/2;
        SedDiffuser_Origin[2] - L_SedManifoldDiffuser
    ]
])
SedDiffZoomInner := ZoomWindow([SedDiffuser_Origin[0] - L_SedDiffuserOutlet; SedDiffuser_Origin[1] + W_SedDiffuserOutlet], [SedDiffuser_Origin[0] + L_SedDiffuserOutlet; SedDiffuser_Origin[1] - W_SedDiffuserOutlet])
SedDiffInnerLoft := Loft([
    SedDiffuser_Origin[0] + innerdiameter(ND_SedDiffuser, PS_Default)/2;
    SedDiffuser_Origin[1];
    SedDiffuser_Origin[2]
], [
    SedDiffuser_Origin[0] + L_SedDiffuserOutlet/2;
    SedDiffuser_Origin[1] + W_SedDiffuserOutlet/2;
    SedDiffuser_Origin[2] - L_SedManifoldDiffuser
])
SedDiffGroupInner := GroupAll("DeleteMe")
SedDiffSubtract := SubtractF(["SedManifoldDiffuserPlu"], "DeleteMe")
SedDiffSelect := SelectLayer("SedManifoldDiffuserPlu")
SedDiffArray := Array_All(1, N_SedManifoldPorts, B_SedManifoldPort)
SedDiffuserScript := stack(SedDiffLayer, SedDiffOuterCircleSection, SedDiffOuterRectangleSection, SedDiffZoomOuter, SedDiffOuterLoft, SedDiffuserFreeze, SedDiffInnerCircleSection, SedDiffInnerRectangleSection, SedDiffZoomInner, SedDiffInnerLoft, SedDiffGroupInner, SedDiffSubtract, SedDiffSelect, SedDiffArray, SedDiffuserFreeze)
# Finish Inlet and Exit Channels, and add last wall
# Finish tank walls
SelectSedCon
SedLowerWall := BoxF([-L_Sed - T_PlantWall; -T_PlantWall; H_Sed] + Plant_Origin, Plant_Origin + [T_PlantWall; 0; -T_PlantWall], [0; 0; 0]*deg)
SedWallTopUnderChannel := BoxF([0 m; (W_Sed + T_SedWallDivider)*N_SedTanks - T_SedWallDivider + T_PlantWall; 0 m] + Plant_Origin, [
    -L_Sed + Plant_Origin[0];
    -T_SedWallDivider + (W_Sed + T_SedWallDivider)*N_SedTanks + Plant_Origin[1];
    Z_SedChannelBottom - T_ChannelWall
], [0; 0; 0]*deg)
SedWallTopAboveChannel := BoxF([0 m; (W_Sed + T_SedWallDivider)*N_SedTanks - T_SedWallDivider + T_PlantWall; H_Sed] + Plant_Origin, [
    -L_Sed + W_SedInletChannel + W_SedExitChannel + T_ChannelWall + T_SedWeir;
    -T_SedWallDivider + (W_Sed + T_SedWallDivider)*N_SedTanks + Plant_Origin[1];
    H_Sed - Z_SedChannelBottom - T_ChannelWall
] + Plant_Origin, [0; 0; 0]*deg)
SedChannelCap := BoxF([
    -L_Sed + W_SedInletChannelPreWeir;
    (W_Sed + T_SedWallDivider)*N_SedTanks - T_SedWallDivider + T_PlantWall;
    H_Sed
] + Plant_Origin, [
    -L_Sed + W_SedInletChannel + W_SedExitChannel + T_SedWeir + Plant_Origin[0];
    -T_SedWallDivider + (W_Sed + T_SedWallDivider)*N_SedTanks + Plant_Origin[1];
    Z_SedChannelBottom
], [0; 0; 0]*deg) = "_box -4.05368,3.6504,1.75843 -3.45368,3.5004,1.42653"
SedTankWalls := stack(SelectSedCon, SedLowerWall, SedChannelCap, SedWallTopUnderChannel, SedWallTopAboveChannel)
# Channel Weirs and Dividing Wall
SedInletChannelYWeir := BoxF([
    Plant_Origin[0] - L_Sed + W_SedInletChannelPreWeir;
    Plant_Origin[1] + 2*(S_Fitting + ConRadius(ND_SedExitChannelDrain));
    Z_SedChannelBottom
], [
    Plant_Origin[0] - L_Sed + W_SedInletChannelPreWeir + T_SedWeir;
    Plant_Origin[1] - T_PlantWall + (W_SedBay*N_SedBays + T_PlantWall)*N_SedTanks;
    Z_SedChannelBottom + H_SedWeirInlet
], [0; 0; 0]*deg)
SedInletChannelXWeir := BoxF([
    Plant_Origin[0] - L_Sed + W_SedInletChannelPreWeir;
    Plant_Origin[1] + 2*(S_Fitting + ConRadius(ND_SedExitChannelDrain));
    Z_SedChannelBottom
], [
    Plant_Origin[0] - L_Sed;
    Plant_Origin[1] + 2*(S_Fitting + ConRadius(ND_SedExitChannelDrain)) + T_SedWeir;
    Z_SedChannelBottom + H_SedWeirInlet
], [0; 0; 0]*deg)
SedChannelDivider := BoxF([Plant_Origin[0] - L_Sed + W_SedInletChannel; Plant_Origin[1]; Z_SedChannelBottom], [
    Plant_Origin[0] - L_Sed + W_SedInletChannel + T_SedWeir;
    Plant_Origin[1] - T_PlantWall + (W_SedBay*N_SedBays + T_PlantWall)*N_SedTanks;
    Z_SedChannelBottom + H_SedInletChannel
], [0; 0; 0]*deg)
SedExitChannelWeirY := BoxF([
    Plant_Origin[0] - L_Sed + W_SedInletChannel + T_SedWeir + W_SedExitChannelPostWeir;
    Plant_Origin[1];
    Z_SedChannelBottom
], [
    Plant_Origin[0] - L_Sed + W_SedInletChannel + 2*T_SedWeir + W_SedExitChannelPostWeir;
    Plant_Origin[1] - T_PlantWall + (W_SedBay*N_SedBays + T_SedWallDivider)*N_SedTanks - S_Fitting - OuterDiameterFittingPVC(ND_FiEntrancePipe);
    Z_SedChannelBottom + H_SedWeirExit
], [0; 0; 0]*deg)
SedExitChannelWeirX := BoxF([
    Plant_Origin[0] - L_Sed + W_SedInletChannel + T_SedWeir + W_SedExitChannelPostWeir;
    Plant_Origin[1] - T_PlantWall + (W_Sed + T_SedWallDivider)*N_SedTanks - OuterDiameterFittingPVC(ND_FiEntrancePipe) - S_Fitting - T_SedWeir;
    Z_SedChannelBottom
], [
    Plant_Origin[0] - L_Sed + W_SedInletChannel + 2*T_SedWeir + W_SedExitChannelPostWeir + W_SedExitChannelPreWeir;
    Plant_Origin[1] - T_PlantWall + (W_Sed + T_SedWallDivider)*N_SedTanks - S_Fitting - OuterDiameterFittingPVC(ND_FiEntrancePipe);
    Z_SedChannelBottom + H_SedWeirExit
], [0; 0; 0]*deg)
SedChannelWeirScript := stack(SedInletChannelYWeir, SedInletChannelXWeir, SedChannelDivider, SedExitChannelWeirY, SedExitChannelWeirX, Union_All, FreezeSedTank)
FinishSedChannelScript := stack(SedTankWalls, SedChannelWeirScript)
# Inlet Channel Drain
# Origins and Dimensions
SedIChannelDrainVertCoupling_Origin := [
    Plant_Origin[0] - L_Sed - T_PlantWall + max(T_PlantWall, CouplingLength(ND_SedInletChannelDrain)) + SocketDepth(ND_SedInletChannelDrain) + ElbowRadius(ND_SedInletChannelDrain);
    Plant_Origin[1] + S_Fitting + ConRadius(ND_SedInletChannelDrain);
    Plant_Origin[2] + Z_SedChannelBottom - CouplingLength(ND_SedInletChannelDrain) + SocketDepth(ND_SedInletChannelDrain)
]
L_SedIChannelVertPipe := Z_SedChannelBottom - CouplingLength(ND_SedInletChannelDrain) - ElbowRadius(ND_SedInletChannelDrain) - ConRadius(ND_SedInletChannelDrain)
L_SedIChannelHorizPipe := SedIChannelDrainVertCoupling_Origin[0] - (Plant_Origin[0] - L_Sed - T_PlantWall) - CouplingLength(ND_SedInletChannelDrain) + SocketDepth(ND_SedInletChannelDrain) - ElbowRadius(ND_SedInletChannelDrain)
SedIChannelDrainHorizCoupling_Origin := [
    Plant_Origin[0] - T_PlantWall - SocketDepth(ND_SedExitChannelDrain) - L_Sed + CouplingLength(ND_SedExitChannelDrain);
    SedIChannelDrainVertCoupling_Origin[1];
    SedIChannelDrainVertCoupling_Origin[2] - L_SedIChannelVertPipe - ElbowRadius(ND_SedExitChannelDrain)
]
# Inlet Channel Drain Fittings
SedIChannelDrainVertCoupling := CouplingSUBF(SedIChannelDrainVertCoupling_Origin, [0; 90; 0]*deg, ND_SedInletChannelDrain, PS_Default, ["SedTankCon"])
SedIChannelDrainElbow := ElbowSUBF(SedIChannelDrainVertCoupling_Origin + [0 m; 0 m; -L_SedIChannelVertPipe], [0; 0; 270]*deg, ND_SedInletChannelDrain, PS_Default, ["SedTankCon"])
SedIChannelHorizCoupling := CouplingSUBF(SedIChannelDrainHorizCoupling_Origin, [0; 0; 0]*deg, ND_SedExitChannelDrain, PS_Default, ["SedTankCon"])
SedInletChannelDrainFittingScript := stack(SelectSedFittings, SedIChannelDrainVertCoupling, SedIChannelDrainElbow, SedIChannelHorizCoupling, SedFittingFrz)
distancefromflocweir := Z_SedChannelBottom - T_ChannelWall - Z_SedFlocWeir = 41.5649 cm
# Inlet Channel Drain Pipes
SedIChannelDrainHorizPipe := PipeSUBF([
    SedIChannelDrainVertCoupling_Origin[0] - ElbowRadius(ND_SedInletChannelDrain);
    SedIChannelDrainVertCoupling_Origin[1];
    SedIChannelDrainHorizCoupling_Origin[2]
], L_SedIChannelHorizPipe, [0; 0; 0]*deg, ND_SedInletChannelDrain, PS_Default, ["SedTankCon"])
SedIChannelDrainVertPipe := PipeSUBF(SedIChannelDrainVertCoupling_Origin, L_SedIChannelVertPipe, [0; 270; 0]*deg, ND_SedInletChannelDrain, PS_Default, ["SedTankCon"])
SedIChannelDrainStub := PipeF(SedIChannelDrainVertCoupling_Origin + [0 m; 0 m; CouplingLength(ND_SedInletChannelDrain) - 2*SocketDepth(ND_SedInletChannelDrain)], H_SedInletChannel + SocketDepth(ND_SedInletChannelDrain), [0; 90; 0]*deg, ND_SedInletChannelDrain, PS_Default)
SedInletDrainRemovables := layer_new("SedInletDrainRemovables", red)
SedInletDrainRemovablesSelect := SelectLayer("SedInletDrainRemovables")
SedInletDrainRemovablesFrz := FreezeLayer("SedInletDrainRemovables")
SedInletChannelDrainPipeScript := stack(SelectSedPipes, SedIChannelDrainHorizPipe, SedIChannelDrainVertPipe, SedPipeFrz, SedInletDrainRemovables, SedIChannelDrainStub, SedInletDrainRemovablesFrz)
SedInletDrainScript := stack(SedInletChannelDrainFittingScript, SedInletChannelDrainPipeScript)
# Outlets to Filter
# Origins and Dimensions
SedOutletCoupling1_Origin(N) := [
    Plant_Origin[0] - L_Sed + W_SedInletChannel + T_SedWeir + ConRadius(ND_FiEntrancePipe);
    Plant_Origin[1] - T_PlantWall + (W_SedBay*N_SedBays + T_SedWallDivider)*N_SedTanks - ConRadius(ND_FiEntrancePipe) - S_Fitting - (N - 1)*W_SedBay - T_PlantWall*floor((N - 1)/N_SedBays);
    Z_SedChannelBottom - SocketDepth(ND_FiEntrancePipe)
]
SedOutletVertPipe_Origin(N) := SedOutletCoupling1_Origin(N) + [0; 0; 2*SocketDepth(ND_FiEntrancePipe) - CouplingLength(ND_FiEntrancePipe)]
L_SedOutletVertPipe := 2*SocketDepth(ND_FiEntrancePipe) + max(0, T_ChannelWall - CouplingLength(ND_FiEntrancePipe))
SedOutletElbow_Origin(N) := SedOutletVertPipe_Origin(N) - [0; 0; L_SedOutletVertPipe]
SedOutletCoupling2_Origin(N) := [
    Plant_Origin[0] - T_PlantWall - L_Sed + CouplingLength(ND_FiEntrancePipe) - SocketDepth(ND_FiEntrancePipe);
    SedOutletElbow_Origin(N)[1];
    -ElbowRadius(ND_FiEntrancePipe) + SedOutletElbow_Origin(N)[2]
]
SedOutletHorizPipe_Origin(N) := [-ElbowRadius(ND_FiEntrancePipe); 0; -ElbowRadius(ND_FiEntrancePipe)] + SedOutletElbow_Origin(N)
# If there are two filters, the second filter runs into the platform with the sed tanks on it. We need to move the outlet pipes to the filter down along the (y axis) outlet channel so that the filter also slides down.
MoveOutletDown :=
    N_Fi - 1 if N_Fi ≥ 2
    0 otherwise
# Sed Outlet Fittings
SedOutletCoupling1Script :=
    Local ← SelectSedFittings
    for i ∈ 1 + MoveOutletDown .. N_FiEntrancePipes + MoveOutletDown
        OutletCoupling ← CouplingSUBF(SedOutletCoupling1_Origin(i), [0; 270]*deg, ND_FiEntrancePipe, PS_Default, ["SedTankCon"])
        Local ← stack(Local, OutletCoupling)
    Local ← stack(Local, SedFittingFrz)
    return Local
move
SedOutletElbowScript :=
    Local ← SelectSedFittings
    for i ∈ 1 + MoveOutletDown .. N_FiEntrancePipes + MoveOutletDown
        OutletElbow ← ElbowSUBF(SedOutletElbow_Origin(i), [0; 0; 270]*deg, ND_FiEntrancePipe, PS_Default, ["SedTankCon"])
        Local ← stack(Local, OutletElbow)
    Local ← stack(Local, SedFittingFrz)
    return Local
SedOutletCoupling2Script :=
    Local ← SelectSedFittings
    for i ∈ 1 + MoveOutletDown .. N_FiEntrancePipes + MoveOutletDown
        OutletCoupling ← CouplingSUBF(SedOutletCoupling2_Origin(i), [0; 0]*deg, ND_FiEntrancePipe, PS_Default, ["SedTankCon"])
        Local ← stack(Local, OutletCoupling)
    Local ← stack(Local, SedFittingFrz)
    return Local
# Sed Outlet Pipes
SedOutletVertPipeScript :=
    Local ← SelectSedPipes
    for i ∈ 1 + MoveOutletDown .. N_FiEntrancePipes + MoveOutletDown
        OutletPipe ← PipeSUBF(SedOutletVertPipe_Origin(i), L_SedOutletVertPipe, [0; 270]*deg, ND_FiEntrancePipe, PS_Default, ["SedTankCon"])
        Local ← stack(Local, OutletPipe)
    Local ← stack(Local, SedPipeFrz)
    return Local
SedOutletHorizPipeScript :=
    Local ← SelectSedPipes
    for i ∈ 1 + MoveOutletDown .. N_FiEntrancePipes + MoveOutletDown
        OutletPipe ← PipeSUBF(SedOutletHorizPipe_Origin(i), SedOutletElbow_Origin(i)[0] - ElbowRadius(ND_FiEntrancePipe) - (Plant_Origin[0] - T_PlantWall - L_Sed + CouplingLength(ND_FiEntrancePipe) - SocketDepth(ND_FiEntrancePipe)), [0; 0]*deg, ND_FiEntrancePipe, PS_Default, ["SedTankCon"])
        Local ← stack(Local, OutletPipe)
    Local ← stack(Local, SedPipeFrz)
    return Local
SedOutletScript := stack(SedOutletCoupling1Script, SedOutletElbowScript, SedOutletCoupling2Script, SedOutletVertPipeScript, SedOutletHorizPipeScript)
# Array Inlet Channel
# Inlet Channel Plumbing and Concrete completed by st587 7/22/14
InletFloorHeight := (H_SedWeirInlet - H_PlantFreeboard)/(N_SedTanks - 1)
InletHeight :=
    dZ ← InletFloorHeight
    i ← 1
    while i ≤ N_SedTanks
        Height ← stack(Height, (N_SedTanks - i)*dZ)
        i ← i + 1
    return Height
# InletHeight determines the extra height above the original floor of the inlet channel the
# plumbing and concrete should be for each sed tank.
SedManifoldSpace := (W_Sed - 2*ConRadius(ND_SedManifold) - 2*S_Fitting)/2 = 0.391325 m
# The spaces between the Manifold and Hopper Viewer Pipes are used to make inclines.
# The space available on both sides of the  Sed Tank Wall are determined by the type of pipe closest to it. If the closest pipe is a manifold pipe, the SedManifoldSpace would be the space available.
SedHopperViewerSpace := SedManifoldSpace - 2*S_Fitting - 2*ConRadius(ND_SedHopperViewer) = 0.223062 m
InletOrigin := [
    Plant_Origin[0] - L_Sed + W_SedInletChannelPreWeir;
    Plant_Origin[1] + 2*(S_Fitting + ConRadius(ND_SedExitChannelDrain)) + T_SedWeir;
    Z_SedChannelBottom
]
InletCalculations := stack(InletFloorHeight, InletHeight, SedManifoldSpace, SedHopperViewerSpace)
SelectSedCon := SelectLayer("SedTankCon")
FreezeSedTank := FreezeLayer("SedTankCon")
AngleInletFloor :=
    local ← SelectSedCon
    dZ ← InletFloorHeight
    HeightVector ← InletHeight
    BlockOrigin ← InletOrigin
    BlockFarCorner ← [
        BlockOrigin[0] - W_SedInletChannelPreWeir;
        Plant_Origin[1] + (-W_SedDiffuserOutlet/2) + outerradius(ND_SedJetReverser) + W_SedBay/2 - T_SedDiffuserWall - S_FromSedWall + ConRadius(ND_SedManifold) + T_SedWallDivider + SedManifoldSpace + 3*S_Fitting + 2*ConRadius(ND_SedHopperViewer);
        (BlockOrigin[2] + HeightVector[1])
    ]
    Block ← BoxF(BlockOrigin, BlockFarCorner, [0; 0; 0]*deg)
    local ← stack(local, Block)
    NumTanks ← 2
    while NumTanks ≤ (N_SedTanks - 1)
        BlockOrigin ← BlockFarCorner + [W_SedInletChannelPreWeir; 0 m; -HeightVector[NumTanks - 1]]
        BlockFarCorner ← BlockOrigin + [
            -W_SedInletChannelPreWeir;
            4*S_Fitting + 2*ConRadius(ND_SedManifold) + T_SedWallDivider + SedManifoldSpace + SedHopperViewerSpace + 2*ConRadius(ND_SedHopperViewer);
            HeightVector[NumTanks]
        ]
        Block ← BoxF(BlockOrigin, BlockFarCorner, [0; 0; 0]*deg)
        local ← stack(local, Block)
        NumTanks ← NumTanks + 1
    local ← stack(local, FreezeSedTank)
    WedgeOrigin ← [
        InletOrigin[0];
        Plant_Origin[1] + (-W_SedDiffuserOutlet/2) + outerradius(ND_SedJetReverser) + W_SedBay/2 - T_SedDiffuserWall - S_FromSedWall + ConRadius(ND_SedManifold) + T_SedWallDivider + SedManifoldSpace + 3*S_Fitting + 2*ConRadius(ND_SedHopperViewer);
        InletOrigin[2] + HeightVector[1]
    ]
    WedgeFarCorner ← WedgeOrigin + [-T_SedWallDivider - SedManifoldSpace; -W_SedInletChannelPreWeir; dZ]
    Wedge ← WedgeF(WedgeOrigin, WedgeFarCorner, [-90; 0; 180]*deg)
    local ← stack(local, Wedge)
    NumTanks ← 2
    while NumTanks ≤ (N_SedTanks - 1)
        WedgeOrigin ← WedgeOrigin + [
            0 m;
            4*S_Fitting + 2*ConRadius(ND_SedHopperViewer) + 2*ConRadius(ND_SedManifold) + SedHopperViewerSpace + T_SedWallDivider + SedManifoldSpace;
            -dZ
        ]
        WedgeFarCorner ← WedgeOrigin + [-T_SedWallDivider - SedManifoldSpace - SedHopperViewerSpace; -W_SedInletChannelPreWeir; dZ]
        Wedge ← WedgeF(WedgeOrigin, WedgeFarCorner, [-90; 0; 180]*deg)
        local ← stack(local, Wedge)
        NumTanks ← NumTanks + 1
    local ← stack(local, GroupDelete)
    SubtractWedge ← SubtractF(["SedTankCon"], "DeleteMe")
    local ← stack(local, SubtractWedge)
    return local
SelectSedFittings == SelectLayer("SedFittingPlu")
SedFittingFrz == FreezeLayer("SedFittingPlu")
SedManVertCoupling_Origin := [
    Plant_Origin[0] - L_Sed + W_SedInletChannelPreWeir - S_Fitting - ConRadius(ND_SedManifold);
    SedManPipe_Origin[1];
    Z_SedChannelBottom - SocketDepth(ND_SedManifold)
]
SedManVertPipe_Origin := [0 m; 0 m; -CouplingLength(ND_SedManifold) + 2*SocketDepth(ND_SedManifold)] + SedManVertCoupling_Origin
X_SedManStub := Plant_Origin[0] - L_Sed + W_SedInletChannelPreWeir - S_Fitting - ConRadius(ND_SedManifold)
L_SedManVertPipe := SedManVertPipe_Origin[2] - SedManElbow_Origin[2] - ElbowRadius(ND_SedManifold) = 0.899827 m  # fixed 8/5/14
SedManStopper == PipeF([X_SedManStub; SedManPipe_Origin[1]; Z_SedChannelBottom - SocketDepth(ND_SedManifold)], H_SedInletChannel + SocketDepth(ND_SedManifold), [0; 90]*deg, ND_SedManifold, PS_Default)
ElevateCoupling :=
    local ← SelectSedFittings
    dZ ← InletFloorHeight
    HeightVector ← InletHeight
    CouplingOrigin ← SedManVertCoupling_Origin + [0 m; 0 m; HeightVector[1]]
    Coupling1 ← CouplingSUBF(CouplingOrigin, [0; 270]*deg, ND_SedManifold, PS_Default, ["SedTankCon"])
    local ← stack(local, Coupling1)
    NumPipes ← 2
    while NumPipes ≤ N_SedTanks
        CouplingOrigin ← CouplingOrigin + [
            0 m;
            4*S_Fitting + 2*ConRadius(ND_SedHopperViewer) + 2*ConRadius(ND_SedManifold) + T_SedWallDivider + SedHopperViewerSpace + SedManifoldSpace;
            -dZ
        ]
        Coupling ← CouplingSUBF(CouplingOrigin, [0; 270]*deg, ND_SedManifold, PS_Default, ["SedTankCon"])
        local ← stack(local, Coupling)
        NumPipes ← NumPipes + 1
    local ← stack(local, SedFittingFrz)
    return local
SedInletPipes := layer_new("SedInletPipes", blue)
L_SedManVertPipe = 0.899827 m
SelectSedInletPipes := SelectLayer("SedInletPipes")
SedInletPipeFrz := FreezeLayer("SedInletPipes")
.899  # or
1.12
LongerPipes :=
    local ← SedInletPipes
    dZ ← InletFloorHeight
    HeightVector ← InletHeight
    PipeOrigin ← SedManVertPipe_Origin + [0 m; 0 m; -L_SedManVertPipe]
    PipeLength ← L_SedManVertPipe + HeightVector[1]
    Pipe1 ← PipeSUBF(PipeOrigin, PipeLength, [0; 90]*deg, ND_SedManifold, PS_Default, ["SedTankCon"])
    local ← stack(local, Pipe1)
    NumPipes ← 2
    while NumPipes ≤ N_SedTanks
        PipeOrigin ← PipeOrigin + [
            0 m;
            4*S_Fitting + 2*ConRadius(ND_SedHopperViewer) + 2*ConRadius(ND_SedManifold) + T_SedWallDivider + SedHopperViewerSpace + SedManifoldSpace;
            0 m
        ]
        PipeLength ← PipeLength - dZ
        Pipe ← PipeSUBF(PipeOrigin, PipeLength, [0; 90]*deg, ND_SedManifold, PS_Default, ["SedTankCon"])
        local ← stack(local, Pipe)
        NumPipes ← NumPipes + 1
    local ← stack(local, SedInletPipeFrz)
    return local
SedInletRemovables := layer_new("SedInletRemovables", red)
SedInletRemovablesSelect := SelectLayer("SedInletRemovables")
SedInletRemovablesFrz := FreezeLayer("SedInletRemovables")
ShorterRemovablePipes :=
    local ← SedInletRemovables
    dZ ← InletFloorHeight
    HeightVector ← InletHeight
    PipeOrigin ← SedManVertCoupling_Origin + [0 m; 0 m; HeightVector[1]]
    PipeLength ← H_SedInletChannel + SocketDepth(ND_SedManifold) - HeightVector[1]
    Pipe1 ← PipeF(PipeOrigin, PipeLength, [0; 90]*deg, ND_SedManifold, PS_Default)
    local ← stack(local, Pipe1)
    NumPipes ← 2
    while NumPipes ≤ N_SedTanks
        PipeOrigin ← PipeOrigin + [
            0 m;
            4*S_Fitting + 2*ConRadius(ND_SedHopperViewer) + 2*ConRadius(ND_SedManifold) + T_SedWallDivider + SedHopperViewerSpace + SedManifoldSpace;
            -dZ
        ]
        PipeLength ← PipeLength + dZ
        Pipe ← PipeSUBF(PipeOrigin, PipeLength, [0; 90]*deg, ND_SedManifold, PS_Default, ["SedTankCon"])
        local ← stack(local, Pipe)
        NumPipes ← NumPipes + 1
    local ← stack(local, SedInletRemovablesFrz)
    return local
H_SedInletChannel = 0.331899 m
SedHopperViewerCoupling :=
    local ← SelectSedFittings
    dZ ← InletFloorHeight
    HeightVector ← InletHeight
    CouplingOrigin ← [
        SedManVertCoupling_Origin[0];
        SedManVertCoupling_Origin[1] + ConRadius(ND_SedHopperViewer) + ConRadius(ND_SedManifold) + 2*S_Fitting;
        Z_SedChannelBottom - SocketDepth(ND_SedHopperViewer) + HeightVector[1]
    ]
    Coupling1 ← CouplingSUBF(CouplingOrigin, [0; 270]*deg, ND_SedHopperViewer, PS_Default, ["SedTankCon"])
    local ← stack(local, Coupling1)
    CouplingOrigin ← CouplingOrigin + [
        0 m;
        T_SedWallDivider + 2*SedHopperViewerSpace + 2*ConRadius(ND_SedHopperViewer) + 2*S_Fitting;
        -dZ
    ]
    Coupling2 ← CouplingSUBF(CouplingOrigin, [0; 270]*deg, ND_SedHopperViewer, PS_Default, ["SedTankCon"])
    local ← stack(local, Coupling2)
    NumPipes ← 3
    while NumPipes ≤ N_SedTanks
        CouplingOrigin ← CouplingOrigin + [0 m; W_Sed + T_SedWallDivider; -dZ]
        Coupling ← CouplingSUBF(CouplingOrigin, [0; 270]*deg, ND_SedHopperViewer, PS_Default, ["SedTankCon"])
        local ← stack(local, Coupling)
        NumPipes ← NumPipes + 1
    local ← stack(local, SedFittingFrz)
    return local
HopperViewerShorterPipes :=
    local ← SedInletRemovablesSelect
    dZ ← InletFloorHeight
    HeightVector ← InletHeight
    PipeOrigin ← [
        SedManVertCoupling_Origin[0];
        SedManVertCoupling_Origin[1] + ConRadius(ND_SedHopperViewer) + ConRadius(ND_SedManifold) + 2*S_Fitting;
        Z_SedChannelBottom - SocketDepth(ND_SedHopperViewer) + HeightVector[1]
    ]
    PipeLength ← H_SedInletChannel + SocketDepth(ND_SedHopperViewer) - HeightVector[1]
    Pipe1 ← PipeF(PipeOrigin, PipeLength, [0; 90]*deg, ND_SedHopperViewer, PS_Default)
    local ← stack(local, Pipe1)
    PipeOrigin ← PipeOrigin + [
        0 m;
        T_SedWallDivider + 2*SedHopperViewerSpace + 2*ConRadius(ND_SedHopperViewer) + 2*S_Fitting;
        -dZ
    ]
    PipeLength ← PipeLength - dZ
    Pipe2 ← PipeF(PipeOrigin, PipeLength, [0; 90]*deg, ND_SedHopperViewer, PS_Default)
    local ← stack(local, Pipe2)
    NumPipes ← 3
    while NumPipes ≤ N_SedTanks
        PipeOrigin ← PipeOrigin + [0 m; W_Sed + T_SedWallDivider; -dZ]
        PipeLength ← PipeLength + dZ
        Pipe ← PipeSUBF(PipeOrigin, PipeLength, [0; 90]*deg, ND_SedHopperViewer, PS_Default, ["SedTankCon"])
        local ← stack(local, Pipe)
        NumPipes ← NumPipes + 1
    local ← stack(local, SedInletRemovablesFrz)
    return local
HopperViewerLowerPipes :=
    local ← SelectSedInletPipes
    dZ ← InletFloorHeight
    HeightVector ← InletHeight
    PipeOrigin ← [
        SedManVertCoupling_Origin[0];
        SedManVertCoupling_Origin[1] + ConRadius(ND_SedHopperViewer) + ConRadius(ND_SedManifold) + 2*S_Fitting;
        Z_SedChannelBottom - SocketDepth(ND_SedHopperViewer) + HeightVector[1] - CouplingLength(ND_SedHopperViewer) + 2*SocketDepth(ND_SedHopperViewer)
    ]
    PipeLength ← T_ChannelWall - CouplingLength(ND_SedHopperViewer) + SocketDepth(ND_SedHopperViewer) + HeightVector[1]
    Pipe1 ← PipeF(PipeOrigin, PipeLength, [0; 270]*deg, ND_SedHopperViewer, PS_Default)
    local ← stack(local, Pipe1)
    PipeOrigin ← PipeOrigin + [
        0 m;
        T_SedWallDivider + 2*SedHopperViewerSpace + 2*ConRadius(ND_SedHopperViewer) + 2*S_Fitting;
        -dZ
    ]
    PipeLength ← PipeLength - dZ
    Pipe2 ← PipeF(PipeOrigin, PipeLength, [0; 270]*deg, ND_SedHopperViewer, PS_Default)
    local ← stack(local, Pipe2)
    NumPipes ← 3
    while NumPipes ≤ N_SedTanks
        PipeOrigin ← PipeOrigin + [0 m; W_Sed + T_SedWallDivider; -dZ]
        PipeLength ← PipeLength - dZ
        Pipe ← PipeSUBF(PipeOrigin, PipeLength, [0; 270]*deg, ND_SedHopperViewer, PS_Default, ["SedTankCon"])
        local ← stack(local, Pipe)
        NumPipes ← NumPipes + 1
    local ← stack(local, SedInletPipeFrz)
    return local
SedInletChannelScript := stack(InletCalculations, SedTankLayer, AngleInletFloor, ElevateCoupling, LongerPipes, ShorterRemovablePipes, SedHopperViewerCoupling, HopperViewerShorterPipes, HopperViewerLowerPipes)
# Origins and Dimensions
H_SkimmerToSurface := (HW_Sed - Z_SedLaunder - outerradius(ND_SedLaunder))/2 = 3.02278 cm
SedSkimmerCoupling0_Origin := [
    Plant_Origin[0] - L_Sed - T_PlantWall + SocketDepth(ND_SedSkimmer);
    Plant_Origin[1] + W_SedBay/2 - ConRadius(ND_SedLaunder) - S_Fitting - ConRadius(ND_SedSkimmer);
    Z_SedChannelBottom - T_ChannelWall - S_Fitting - ConRadius(ND_SedSkimmer)
]
SedSkimmerCap0_Origin := [
    Plant_Origin[0] - L_Sed + W_SedExitChannel + W_SedInletChannel + T_SedWeir + T_ChannelWall + CapDiameter(ND_SedSkimmer)/2;
    SedSkimmerCoupling0_Origin[1];
    Plant_Origin[2] + HW_Sed - H_SkimmerToSurface
]
SedSkimmerHorizPipe0_Origin := [
    SedSkimmerCap0_Origin[0] - ElbowRadius(ND_SedSkimmer);
    SedSkimmerCoupling0_Origin[1];
    SedSkimmerCoupling0_Origin[2]
] = [-3.34575; 0.384975; 1.19239] m
SedSkimmerElbow0_Origin := SedSkimmerHorizPipe0_Origin + [ElbowRadius(ND_SedSkimmer); 0; ElbowRadius(ND_SedSkimmer)]
SedSkimmerVertPipe0_Origin := SedSkimmerCap0_Origin
# Skimmer Fitting 1
SedSkimmerCap0 := CapF(SedSkimmerCap0_Origin, [0; -90]*deg, ND_SedSkimmer)
SedSkimmerElbow0 := ElbowSUBF(SedSkimmerElbow0_Origin, [0; 0; 270]*deg, ND_SedSkimmer, PS_Default, ["SedModLamella"])
SedSkimmerCoupling0 := CouplingSUBF(SedSkimmerCoupling0_Origin, [0; 0; 90]*deg, ND_SedSkimmer, PS_Default, ["SedTankCon"])
SedSkimmerFittingScript0 := stack(SedInletRemovablesSelect, SedSkimmerCap0, SedInletRemovablesFrz, SelectSedFittings, SedSkimmerElbow0, SedSkimmerCoupling0, SedFittingFrz)
# Skimmer Pipe 1
SedSkimmerHorizPipe0 := PipeSUBF(SedSkimmerHorizPipe0_Origin, W_SedInletChannel + W_SedExitChannel + T_SedWeir + T_ChannelWall + T_PlantWall - CouplingLength(ND_SedSkimmer) + ConRadius(ND_SedSkimmer) + SocketDepth(ND_SedSkimmer) - ElbowRadius(ND_SedSkimmer), [0; 0]*deg, ND_SedSkimmer, PS_Default, ["SedTankCon"])
SedSkimmerVertPipe0 := PipeSUBF(SedSkimmerVertPipe0_Origin, SedSkimmerVertPipe0_Origin[2] - SedSkimmerElbow0_Origin[2], [0; -90]*deg, ND_SedSkimmer, PS_Default, ["SedModLamella"])
SedSkimmerPipeScript0 := stack(SelectSedPipes, SedSkimmerHorizPipe0, SedSkimmerVertPipe0, SedPipeFrz)
SedSkimmerCoupling1_Origin := [
    Plant_Origin[0] - L_Sed - T_PlantWall + SocketDepth(ND_SedSkimmer);
    Plant_Origin[1] + W_SedBay/2 - ConRadius(ND_SedLaunder) - 4*S_Fitting - ConRadius(ND_SedSkimmer) + (W_Sed + T_SedWallDivider);
    Z_SedChannelBottom - T_ChannelWall - S_Fitting - ConRadius(ND_SedSkimmer)
]
SedSkimmerCap1_Origin := [
    Plant_Origin[0] - L_Sed + W_SedExitChannel + W_SedInletChannel + T_SedWeir + T_ChannelWall + CapDiameter(ND_SedSkimmer)/2;
    SedSkimmerCoupling1_Origin[1];
    Plant_Origin[2] + HW_Sed - H_SkimmerToSurface
]
SedSkimmerHorizPipe1_Origin := [
    SedSkimmerCap1_Origin[0] - ElbowRadius(ND_SedSkimmer);
    SedSkimmerCoupling1_Origin[1];
    SedSkimmerCoupling1_Origin[2]
] = [-3.34575; 1.45177; 1.19239] m
SedSkimmerElbow1_Origin := SedSkimmerHorizPipe1_Origin + [ElbowRadius(ND_SedSkimmer); 0; ElbowRadius(ND_SedSkimmer)]
SedSkimmerVertPipe1_Origin := SedSkimmerCap1_Origin
# Skimmer Fittings
SedSkimmerFittingScript :=
    local ← SedInletRemovablesSelect
    NumTanks ← 3
    Origin ← SedSkimmerCap1_Origin
    SedSkimmerCap ← CapF(Origin, [0; -90]*deg, ND_SedSkimmer)
    while NumTanks ≤ N_SedTanks
        Origin ← Origin + [0 m; W_Sed + T_SedWallDivider; 0 m]
        SedSkimmerCap ← CapF(Origin, [0; -90]*deg, ND_SedSkimmer)
        local ← stack(local, SedSkimmerCap)
        NumTanks ← NumTanks + 1
    local ← stack(local, SedInletRemovablesFrz, SelectSedFittings)
    Origin ← SedSkimmerElbow1_Origin
    SedSkimmerElbow ← ElbowSUBF(Origin, [0; 0; 270]*deg, ND_SedSkimmer, PS_Default, ["SedModLamella"])
    local ← stack(local, SedSkimmerElbow)
    NumTanks ← 3
    while NumTanks ≤ N_SedTanks
        Origin ← Origin + [0 m; W_Sed + T_SedWallDivider; 0 m]
        SedSkimmerElbow ← ElbowSUBF(Origin, [0; 0; 270]*deg, ND_SedSkimmer, PS_Default, ["SedModLamella"])
        local ← stack(local, SedSkimmerElbow)
        NumTanks ← NumTanks + 1
    NumTanks ← 3
    Origin ← SedSkimmerCoupling1_Origin
    SedSkimmerCoupling ← CouplingSUBF(SedSkimmerCoupling1_Origin, [0; 0; 90]*deg, ND_SedSkimmer, PS_Default, ["SedTankCon"])
    local ← stack(local, SedSkimmerCoupling)
    while NumTanks ≤ N_SedTanks
        Origin ← Origin + [0 m; W_Sed + T_SedWallDivider; 0 m]
        SedSkimmerCoupling ← CouplingSUBF(Origin, [0; 0; 90]*deg, ND_SedSkimmer, PS_Default, ["SedTankCon"])
        local ← stack(local, SedSkimmerCoupling)
        NumTanks ← NumTanks + 1
    local ← stack(local, SedFittingFrz)
    return local
# Skimmer Pipes
SedSkimmerPipesLayer := layer_new("SedSkimmerPipes", blue)
SelectSedSkimmerPipes := SelectLayer("SedSkimmerPipes")
SedSkimmerPipeFrz := FreezeLayer("SedSkimmerPipes")
SedSkimmerPipeScript :=
    local ← SedSkimmerPipesLayer
    Origin ← SedSkimmerHorizPipe1_Origin
    SedSkimmerHorizPipe ← PipeSUBF(SedSkimmerHorizPipe1_Origin, W_SedInletChannel + W_SedExitChannel + T_SedWeir + T_ChannelWall + T_PlantWall - CouplingLength(ND_SedSkimmer) + ConRadius(ND_SedSkimmer) + SocketDepth(ND_SedSkimmer) - ElbowRadius(ND_SedSkimmer), [0; 0]*deg, ND_SedSkimmer, PS_Default, ["SedTankCon"])
    local ← stack(local, SedSkimmerHorizPipe)
    NumTanks ← 3
    while NumTanks ≤ N_SedTanks
        Origin ← Origin + [0 m; W_Sed + T_SedWallDivider; 0 m]
        SedSkimmerHorizPipe ← PipeSUBF(Origin, W_SedInletChannel + W_SedExitChannel + T_SedWeir + T_ChannelWall + T_PlantWall - CouplingLength(ND_SedSkimmer) + ConRadius(ND_SedSkimmer) + SocketDepth(ND_SedSkimmer) - ElbowRadius(ND_SedSkimmer), [0; 0]*deg, ND_SedSkimmer, PS_Default, ["SedTankCon"])
        local ← stack(local, SedSkimmerHorizPipe)
        NumTanks ← NumTanks + 1
    Origin ← SedSkimmerVertPipe1_Origin
    SedSkimmerVertPipe ← PipeSUBF(SedSkimmerVertPipe1_Origin, SedSkimmerVertPipe1_Origin[2] - SedSkimmerElbow1_Origin[2], [0; -90]*deg, ND_SedSkimmer, PS_Default, ["SedModLamella"])
    local ← stack(local, SedSkimmerVertPipe)
    NumTanks ← 3
    while NumTanks ≤ N_SedTanks
        Origin ← Origin + [0 m; W_Sed + T_SedWallDivider; 0 m]
        SedSkimmerVertPipe ← PipeSUBF(Origin, SedSkimmerVertPipe1_Origin[2] - SedSkimmerElbow1_Origin[2], [0; -90]*deg, ND_SedSkimmer, PS_Default, ["SedModLamella"])
        local ← stack(local, SedSkimmerVertPipe)
        NumTanks ← NumTanks + 1
    local ← stack(local, SedSkimmerPipeFrz)
    return local
SedSkimmerScript := stack(SedSkimmerFittingScript0, SedSkimmerPipeScript0, SedSkimmerFittingScript, SedSkimmerPipeScript)
# Add Water Levels
SedWaterLayer := layer_new("SedWater", blue2)
SedWaterBox := BoxF(Plant_Origin, [-L_SedUpflow; W_Sed; HW_Sed] + Plant_Origin, [0; 0; 0]*deg)
SedIChannelWater := BoxF([Plant_Origin[0] - L_Sed; Plant_Origin[1]; Z_SedChannelBottom], [Plant_Origin[0] - L_Sed; Plant_Origin[1]; Z_SedChannelBottom] + [W_SedInletChannelPreWeir + T_SedWeir + W_SedInletChannelPostWeir; W_Sed; HW_SedInletChannel], [0; 0; 0]*deg)
SedEChannelWater := BoxF([
    Plant_Origin[0] - L_Sed + W_SedInletChannel + 2*T_SedWeir + W_SedExitChannelPostWeir;
    Plant_Origin[1];
    Z_SedChannelBottom
], [
    Plant_Origin[0] - L_Sed + W_SedInletChannel + T_SedWeir + W_SedExitChannel;
    Plant_Origin[1] + W_Sed;
    Z_SedChannelBottom + HW_SedExitChannel
], [0; 0; 0]*deg)
SedWaterFrz := FreezeLayer("SedWater")
SedWaterScript := stack(SedWaterLayer, SedWaterBox, SedIChannelWater, SedEChannelWater, SedWaterFrz)
ThawAll := ThawMultiple(["Sed*"])
MirrorDistance :=
    (Floc_Origin[0] - L_Floc - W_TrainWalkway/2 - T_PlantWall) if Mod == 0
    (Plant_Origin[0] - L_Sed - W_TrainWalkway - 2*T_PlantWall) otherwise
MirrorSedTanks := Mirror3dAll("yz", [MirrorDistance; 0 m], "n")
FreezeAll := FreezeMultiple(["Sed*"])
AC_SedTankWater := stack(SedConScript, SedDrainCoverScript, SedManifoldScript, SedLaunderScript, SedHopperDrainScript, SedSludgeDrainScript, SedLamellaScript, SedSkimmerScript, CompleteSedTank, SedTankArrayScript, SedDiffuserScript, FinishSedChannelScript, SedInletDrainScript, SedOutletScript, SedWaterScript)
AC_SedTank :=
    stack(SedConScript, SedDrainCoverScript, SedManifoldScript, SedLaunderScript, SedHopperDrainScript, SedSludgeDrainScript, SedLamellaScript, CompleteSedTank, SedTankArrayScript, SedDiffuserScript, FinishSedChannelScript, SedInletDrainScript, SedOutletScript, SedInletChannelScript, SedSkimmerScript) if EN_DoubleTrain == 0
    stack(SedConScript, SedDrainCoverScript, SedManifoldScript, SedLaunderScript, SedHopperDrainScript, SedSludgeDrainScript, SedLamellaScript, CompleteSedTank, SedTankArrayScript, SedDiffuserScript, FinishSedChannelScript, SedInletDrainScript, SedOutletScript, SedInletChannelScript, SedSkimmerScript, ThawAll, MirrorSedTanks, FreezeAll) otherwise
AC_SedTankMod := stack(SedConScript, SedDrainCoverScript, SedManifoldScript, SedLaunderScript, SedHopperDrainScript, SedSludgeDrainScript, SedLamellaScript, SedSkimmerScript, CompleteSedTank, SedTankArrayScript, SedDiffuserScript, FinishSedChannelScript, SedInletDrainScript, SedOutletScript)
check := stack(SedConScript, SedDrainCoverScript, SedManifoldScript, SedLaunderScript, SedHopperDrainScript, SedSludgeDrainScript, SedLamellaScript, CompleteSedTank)
# [component: inputs check]
AC_SedTank :=
    AC_SedTank if EN_Water == 0
    AC_SedTankWater otherwise
# Inlet Manifold
# Origins and Dimensions
S_FromSedWall := 1 in
SedManPipe_Origin := [
    Plant_Origin[0] - CapThickness(ND_SedManifold);
    Plant_Origin[1] + (-W_SedDiffuserOutlet/2) + outerradius(ND_SedJetReverser) + W_SedBay/2 - T_SedDiffuserWall - S_FromSedWall;
    Z_SedManifoldPipe + S_FromSedWall - DropSedBottom
]
X_SedManStub := Plant_Origin[0] - L_Sed + W_SedInletChannelPreWeir - S_Fitting - ConRadius(ND_SedManifold)
SedManElbow_Origin := SedManPipe_Origin - [L_SedManifoldPipe; 0; 0]
SedManCap_Origin := SedManPipe_Origin + [L_SedManifoldPipe; 0 m; 0 m]
SedManVertCoupling_Origin := [
    Plant_Origin[0] - L_Sed + W_SedInletChannelPreWeir - S_Fitting - ConRadius(ND_SedManifold);
    (Plant_Origin[1] + (-W_SedDiffuserOutlet/2) + outerradius(ND_SedJetReverser) + W_SedBay/2 - T_SedDiffuserWall - S_FromSedWall);
    Z_SedChannelBottom - SocketDepth(ND_SedManifold)
]
SedManVertPipe_Origin := [0 m; 0 m; -CouplingLength(ND_SedManifold) + 2*SocketDepth(ND_SedManifold)] + SedManVertCoupling_Origin
L_SedManVertPipe := SedManVertPipe_Origin[2] - (SedManElbow_Origin[2] + ElbowRadius(ND_SedManifold))
# Manifold Pipes
SedPipeLayer := layer_new("SedPipePlu", blue)
SelectSedPipes := SelectLayer("SedPipePlu")
SedPipeFrz := FreezeLayer("SedPipePlu")
SedRemovableLayer := layer_new("SedRemovablePlu", red)
SelectSedRemovables := SelectLayer("SedRemovablePlu")
SedRemovableFrz := FreezeLayer("SedRemovablePlu")
SedManPipe := PipeSUBF(SedManPipe_Origin, L_SedManifoldPipe, [0; 0]*deg, ND_SedManifold, PS_Default, ["SedTankCon"])
SedManVertPipe := PipeSUBF(SedManVertPipe_Origin, L_SedManVertPipe, [0; 270]*deg, ND_SedManifold, PS_Default, ["SedTankCon"])
SedManStopper := PipeF([
    X_SedManStub;
    (Plant_Origin[1] + (-W_SedDiffuserOutlet/2) + outerradius(ND_SedJetReverser) + W_SedBay/2 - T_SedDiffuserWall - S_FromSedWall);
    Z_SedChannelBottom - SocketDepth(ND_SedManifold)
], H_SedInletChannel + SocketDepth(ND_SedManifold), [0; 90]*deg, ND_SedManifold, PS_Default)
SedManPipeScript :=
    stack(SedPipeLayer, SedManPipe, SedPipeFrz, SedRemovableLayer, SedManStopper, SedRemovableFrz) if EN_SedChannelCoupling == 0
    stack(SedPipeLayer, SedManPipe, SedManVertPipe, SedPipeFrz, SedRemovableLayer, SedManStopper, SedRemovableFrz) otherwise
# Manifold Feet
ND_ManFeet := 1 in
H_subtraction := ((Z_SedSideSlopes - H_SedSludge - T_ConcreteMin)*S_FromSedWall)/(W_SedBay/2 + S_FromSedWall) = 0.0274384 m
H_additional := (W_SedDiffuserOutlet/2 - 1.5*T_SedDiffuserWall + S_FromSedWall)/tan(90 deg - AN_SedSlope)
L_LongTriangleLegA := Z_SedManifoldPipe - T_ConcreteMin - H_subtraction
L_LongTriangleLeg := L_SedManifoldDiffuser + innerdiameter(ND_SedManifold, PS_Default)/2 + H_additional + S_FromSedWall
L_ShortTriangleLeg := tan(90 deg - AN_SedSlope)*L_LongTriangleLeg
L_ShortTriangleLegA := (L_LongTriangleLeg*(W_SedBay/2 - outerradius(ND_SedJetReverser) + S_FromSedWall))/(Z_SedSideSlopes - H_SedSludge - T_ConcreteMin)
S_FromManifold := L_ShortTriangleLeg*cos(90 deg - AN_SedSlope)
L_ShortFoot := S_FromManifold - outerradius(ND_SedManifold)
H_additional2 := (-3*T_SedDiffuserWall - S_FromSedWall + 2*outerradius(ND_SedJetReverser) - W_SedDiffuserOutlet/2)/tan(90 deg - AN_SedSlope)
L_LongTriangleLeg2A := Z_SedSideSlopes - H_SedSludge - T_ConcreteMin - H_subtraction
L_LongTriangleLeg2 := innerdiameter(ND_SedManifold, PS_Default)/2 + L_SedManifoldDiffuser + H_additional2 + S_FromSedWall
S_FromManifold2 := cos(AN_SedSlope)*L_LongTriangleLeg2
L_LongFoot := S_FromManifold2 - outerradius(ND_SedManifold)
Y_1 := S_FromManifold*cos(90 deg - AN_SedSlope)
Y_2 := S_FromManifold2*sin(AN_SedSlope)
Z_1 := S_FromManifold*sin(90 deg - AN_SedSlope)
Z_2 := S_FromManifold2*cos(AN_SedSlope)
ManFeetLayer := layer_new("SedModManFeet", red)
ManFeetLong_OriginPoint := [
    SedManPipe_Origin[0] + CapDiameter(ND_SedManifold)/2 - outerradius(ND_SedManifold) - CapHeight(ND_SedManifold) - ND_ManFeet;
    SedManPipe_Origin[1] - Y_2;
    SedManPipe_Origin[2] - Z_2
]
ManFeetShort_OriginPoint := [ManFeetLong_OriginPoint[0]; SedManPipe_Origin[1] + Y_1; SedManPipe_Origin[2] - Z_1]
ManFeetLong := PipeF(ManFeetLong_OriginPoint, L_LongFoot, [-AN_SedSlope; 90 deg], ND_ManFeet, PS_Default)
ManFeetShort := PipeF(ManFeetShort_OriginPoint, L_ShortFoot, [180 deg - AN_SedSlope; -90 deg], ND_ManFeet, PS_Default)
Loc_Feet := Plant_Origin[0] - L_SedUpflow + T_PlantWall + ND_ManFeet
ManFeetLayerFrz := FreezeLayer("SedModManFeet")
S_SedPipe := .25 in  # Subject to change, not specified in report
Y_3 := (outerradius(ND_SedManifold) + S_SedPipe)*sin(AN_SedSlope)
Y_4 := (outerradius(ND_SedManifold) + S_SedPipe)*cos(90 deg - AN_SedSlope)
Z_3 := (outerradius(ND_SedManifold) + S_SedPipe)*cos(AN_SedSlope)
Z_4 := (outerradius(ND_SedManifold) + S_SedPipe)*sin(90 deg - AN_SedSlope)
R_Hole := .25 in
HoleLongFoot_OriginPoint := [ManFeetLong_OriginPoint[0]; SedManPipe_Origin[1] - Y_3 + 2 in; SedManPipe_Origin[2] - Z_3 - 2 in]
HoleShortFoot_OriginPoint := [ManFeetLong_OriginPoint[0]; SedManPipe_Origin[1] + Y_4 - 2 in; SedManPipe_Origin[2] - Z_4 - 2 in]
DrawHole1 := CylinderF(HoleLongFoot_OriginPoint, R_Hole, 4 in, [180 deg - AN_SedSlope; -90 deg])
DrawHole2 := CylinderF(HoleShortFoot_OriginPoint, R_Hole, 4 in, [-AN_SedSlope; 90 deg])
SubtractHole := SubtractF(["SedModManFeet"], "DeleteMe")
# Hose Clamps:
LayerHoseClamp := layer_new("SedModHoseClamp", purple)
T_Clamp := 1/8*in
L_Clamp := .25 in
R_Clamp := outerradius(ND_SedManifold) + R_Hole + S_SedPipe
HoseClamp_Origin := [ManFeetLong_OriginPoint[0]; SedManPipe_Origin[1]; SedManPipe_Origin[2]]
HoseClampOuter := CylinderF(HoseClamp_Origin, R_Clamp + T_Clamp, L_Clamp, [0; 0]*deg)
FrzLayerHoseClamp := FreezeLayer("SedModHoseClamp")
HoseClampInner := CylinderF(HoseClamp_Origin, R_Clamp, L_Clamp, [0; 0]*deg)
SubtractInner := SubtractF(["SedModHoseClamp"], "DeleteMe")
DrawHoseClamps := stack(LayerHoseClamp, HoseClampOuter, FrzLayerHoseClamp, HoseClampInner, GroupDelete, SubtractInner, DrawHole1, DrawHole2, GroupDelete, SubtractHole)
SelectHoseClamps := SelectLayer("SedModHoseClamp")
SelectFeet := SelectLayer("SedModManFeet")
ArrayFeet := array_all(1, 2, Loc_Feet)
ManFeetScript := stack(ManFeetLayer, ManFeetLong, ManFeetShort, ManFeetLayerFrz, DrawHoseClamps, SelectHoseClamps, SelectFeet, ArrayFeet, FrzLayerHoseClamp, ManFeetLayerFrz)
# Manifold Fittings
SedFittingLayer := layer_new("SedFittingPlu", green)
SelectSedFittings := SelectLayer("SedFittingPlu")
SedFittingFrz := FreezeLayer("SedFittingPlu")
SedManElbow := ElbowSUBF(SedManElbow_Origin, [90; 0; 270]*deg, ND_SedManifold, PS_Default, ["SedTankCon"])
SedManCap := CapF(SedManPipe_Origin, [0; 0; 0]*deg, ND_SedManifold)
SedManVertCoupling := CouplingSUBF(SedManVertCoupling_Origin, [0; 270]*deg, ND_SedManifold, PS_Default, ["SedTankCon"])
SedManFittingScript :=
    stack(SedFittingLayer, SedManCap, SedManElbow, SedManVertCoupling, SedFittingFrz) if EN_SedChannelCoupling == 1
    stack(SedFittingLayer, SedManCap, SedManElbow, SedFittingFrz) otherwise
# Manifold Orifices
SedManOrifice := CylinderF([
    Plant_Origin[0] - L_Sed + L_SedHopper + L_SedDiffuserOutlet/2 + T_SedDiffuserWall + (W_SedInletChannelPreWeir + T_ChannelWall)*(EN_InletChannelGeom == Inlet_FullDepth);
    SedManPipe_Origin[1];
    SedManPipe_Origin[2]
], D_SedManifoldPort/2, ND_SedManifold, [0; 270]*deg)
ArraySedManOrifice := array_all(1, N_SedManifoldPorts, B_SedManifoldPort)
# Air Vent Holes
SedManAirVent := CylinderF([
    Plant_Origin[0] - 2*N_AirVentHoles*B_AirVentHoles;
    SedManPipe_Origin[1];
    SedManPipe_Origin[2] + outerradius(ND_SedManifold) + ND_SedManifold/4
], D_AirVentHoles/2, ND_SedManifold/2, [0; 270]*deg)
ArraySedManAirVent := array_all(1, N_AirVentHoles, B_AirVentHoles)
SubtractFromSedPipes := SubtractF(["SedPipePlu"], "DeleteMe")
SubtractFromSedFittings := SubtractF(["SedFittingPlu"], "DeleteMe")
SedManOrificeScript := stack(SedManOrifice, ArraySedManOrifice, SedManAirVent, ArraySedManAirVent, GroupDelete, SubtractFromSedPipes, SedManOrifice, ArraySedManOrifice, SedManAirVent, ArraySedManAirVent, GroupDelete, SubtractFromSedFittings)
SedManifoldScript := stack(SedManPipeScript, SedManFittingScript, SedManOrificeScript, ManFeetScript)
# Exit Launder
# Origins and Dimensions
SedLaunderPipe_Origin :=
    if T_ChannelWall > CouplingLength(ND_SedLaunder)
        [
            Plant_Origin[0] - L_SedChannelToWall + max(0 m, 2*CouplingLength(ND_SedLaunder) - T_ChannelWall) - SocketDepth(ND_SedLaunder);
            W_SedBay - 1/2*W_SedBay + Plant_Origin[1];
            Z_SedLaunder
        ]
    otherwise
        [
            Plant_Origin[0] - L_SedChannelToWall - T_ChannelWall + CouplingLength(ND_SedLaunder) - SocketDepth(ND_SedLaunder);
            W_SedBay - 1/2*W_SedBay + Plant_Origin[1];
            Z_SedLaunder
        ]
SedLaunderCap_Origin := SedLaunderPipe_Origin + [L_SedLaunder; 0 m; 0 m]
SedLaunderCoupling1_Origin := [
    Plant_Origin[0] - L_Sed + W_SedExitChannel + W_SedInletChannel + T_SedWeir + SocketDepth(ND_SedLaunder);
    W_SedBay - 1/2*W_SedBay + Plant_Origin[1];
    Z_SedLaunder
]
SedLaunderCoupling2_Origin := [
    Plant_Origin[0] - L_SedChannelToWall + max(0 m, 2*CouplingLength(ND_SedLaunder) - T_ChannelWall) - SocketDepth(ND_SedLaunder);
    W_SedBay - 1/2*W_SedBay + Plant_Origin[1];
    Z_SedLaunder
]
SedLaunderNipple_Origin := SedLaunderCoupling1_Origin + [CouplingLength(ND_SedLaunder) - 2*SocketDepth(ND_SedLaunder); 0 m; 0 m]
# Launder Fittings
SedLaunderEndCap := CapF(SedLaunderCap_Origin, [0; 0]*deg, ND_SedLaunder)
SedLaunderPlugCap := CapF([
    Plant_Origin[0] - L_SedChannelToWall - T_ChannelWall - CapHeight(ND_SedLaunder) + CapThickness(ND_SedLaunder);
    W_SedBay - 1/2*W_SedBay + Plant_Origin[1];
    Z_SedLaunder
], [180; 0]*deg, ND_SedLaunder)
SedLaunderCoupling1 := CouplingSUBF(SedLaunderCoupling1_Origin, [0; 180]*deg, ND_SedLaunder, PS_Default, ["SedTankCon"])
SedLaunderCoupling2 := CouplingSUBF(SedLaunderCoupling2_Origin, [0; 0]*deg, ND_SedLaunder, PS_Default, ["SedTankCon"])
SedLaunderFittingScript :=
    stack(SelectSedFittings, SedLaunderEndCap, SedLaunderCoupling1, SedFittingFrz, SelectSedRemovables, SedLaunderPlugCap, SedRemovableFrz) if CouplingLength(ND_SedLaunder) ≥ T_ChannelWall
    stack(SelectSedFittings, SedLaunderEndCap, SedLaunderCoupling1, SedLaunderCoupling2, SedFittingFrz, SelectSedRemovables, SedLaunderPlugCap, SedRemovableFrz) otherwise
# Launder Pipes
SedLaunderPipe := PipeF(SedLaunderPipe_Origin, L_SedLaunder, [0; 180]*deg, ND_SedLaunder, PS_Default)
SedLaunderPlugNipple := PipeF([
    Plant_Origin[0] - L_SedChannelToWall - T_ChannelWall + L_SedLaunderCapExcess;
    W_SedBay - 1/2*W_SedBay + Plant_Origin[1];
    Z_SedLaunder
], CapHeight(ND_SedLaunder) - CapThickness(ND_SedLaunder) + L_SedLaunderCapExcess, [0; 0]*deg, ND_SedLaunder, PS_Default)
SedLaunderNipple := PipeSUBF(SedLaunderNipple_Origin, T_ChannelWall - 2*CouplingLength(ND_SedLaunder) + 2*SocketDepth(ND_SedLaunder), [0; 180]*deg, ND_SedLaunder, PS_Default, ["SedTankCon"])
SedLaunderPipeScript :=
    stack(SelectSedPipes, SedLaunderPipe, SedPipeFrz, SelectSedRemovables, SedLaunderPlugNipple, SedRemovableFrz) if CouplingLength(ND_SedLaunder) ≥ T_ChannelWall
    stack(SelectSedPipes, SedLaunderPipe, SedLaunderNipple, SedPipeFrz, SelectSedRemovables, SedLaunderPlugNipple, SedRemovableFrz) otherwise
# Launder Orifices
SedLaunderOrifice := CylinderF([SocketDepth(ND_SedLaunder) + 1/2*B_SedLaunderOrifices; 0 m; 0 m] + SedLaunderPipe_Origin, D_SedLaunderOrifice/2, ND_SedLaunder, [0; 90]*deg)
ArraySedLaunderOrifices := array_all(1, N_SedLaunderOrifices, B_SedLaunderOrifices)
SedLaunderOrificeScript := stack(SedLaunderOrifice, ArraySedLaunderOrifices, GroupDelete, SubtractFromSedPipes, SedLaunderOrifice, ArraySedLaunderOrifices, GroupDelete, SubtractFromSedFittings)
SedLaunderScript := stack(SedLaunderFittingScript, SedLaunderPipeScript, SedLaunderOrificeScript)
# Origins and Dimensions
# The floc skimmer is a 2 inch nominal diameter pipe that starts at a coupling in the wall of the sedimentation tank under the exit channel, wraps around the exit channel and ends a few centimeters below the surface of the water in the sed tank.Its purpose is to capture any flocs that pass up through the plate settlers when the cap on the top of the pipe is removed.
H_SkimmerToSurface := (HW_Sed - Z_SedLaunder - outerradius(ND_SedLaunder))/2 = 3.02278 cm
SedSkimmerCoupling_Origin := [
    Plant_Origin[0] - L_Sed - T_PlantWall + SocketDepth(ND_SedSkimmer);
    Plant_Origin[1] + W_SedBay/2 - ConRadius(ND_SedLaunder) - S_Fitting - ConRadius(ND_SedSkimmer);
    Z_SedChannelBottom - T_ChannelWall - S_Fitting - ConRadius(ND_SedSkimmer)
]
SedSkimmerCap_Origin := [
    Plant_Origin[0] - L_Sed + W_SedExitChannel + W_SedInletChannel + T_SedWeir + T_ChannelWall + CapDiameter(ND_SedSkimmer)/2;
    SedSkimmerCoupling_Origin[1];
    Plant_Origin[2] + HW_Sed - H_SkimmerToSurface
]
SedSkimmerHorizPipe_Origin := [
    SedSkimmerCap_Origin[0] - ElbowRadius(ND_SedSkimmer);
    SedSkimmerCoupling_Origin[1];
    SedSkimmerCoupling_Origin[2]
]
SedSkimmerElbow_Origin := SedSkimmerHorizPipe_Origin + [ElbowRadius(ND_SedSkimmer); 0; ElbowRadius(ND_SedSkimmer)]
SedSkimmerVertPipe_Origin := SedSkimmerCap_Origin
# Skimmer Fittings
SedSkimmerCap := CapF(SedSkimmerCap_Origin, [0; -90]*deg, ND_SedSkimmer)
SedSkimmerElbow := ElbowSUBF(SedSkimmerElbow_Origin, [0; 0; 270]*deg, ND_SedSkimmer, PS_Default, ["SedModLamella"])
SedSkimmerCoupling := CouplingSUBF(SedSkimmerCoupling_Origin, [0; 0; 90]*deg, ND_SedSkimmer, PS_Default, ["SedTankCon"])
SedSkimmerFittingScript := stack(SelectSedRemovables, SedSkimmerCap, SedRemovableFrz, SelectSedFittings, SedSkimmerElbow, SedSkimmerCoupling, SedFittingFrz)
# Skimmer Pipes
SedSkimmerHorizPipe := PipeSUBF(SedSkimmerHorizPipe_Origin, W_SedInletChannel + W_SedExitChannel + T_SedWeir + T_ChannelWall + T_PlantWall - CouplingLength(ND_SedSkimmer) + ConRadius(ND_SedSkimmer) + SocketDepth(ND_SedSkimmer) - ElbowRadius(ND_SedSkimmer), [0; 0]*deg, ND_SedSkimmer, PS_Default, ["SedTankCon"])
SedSkimmerVertPipe := PipeSUBF(SedSkimmerVertPipe_Origin, SedSkimmerVertPipe_Origin[2] - SedSkimmerElbow_Origin[2], [0; -90]*deg, ND_SedSkimmer, PS_Default, ["SedModLamella"])
SedSkimmerPipeScript := stack(SelectSedPipes, SedSkimmerHorizPipe, SedSkimmerVertPipe, SedPipeFrz)
SedSkimmerScript := stack(SedSkimmerFittingScript, SedSkimmerPipeScript)
# Floc Skimmer
# Hopper Viewer
SedHopperViewerStub_Origin := [
    Plant_Origin[0] - L_Sed + W_SedInletChannel + 2*T_SedWeir + W_SedExitChannelPostWeir + W_SedExitChannelPreWeir/2;
    SedManPipe_Origin[1] - ConRadius(ND_SedManifold) - 2*ConRadius(ND_SedSkimmer) - 2*S_Fitting - ConRadius(ND_SedHopperViewer);
    Z_SedChannelBottom - SocketDepth(ND_SedHopperViewer)
]
SedHopperViewerCoupling_Origin := SedHopperViewerStub_Origin
SedHopperViewerPipe_Origin := SedHopperViewerCoupling_Origin + [0 m; 0 m; -CouplingLength(ND_SedHopperViewer) + 2*SocketDepth(ND_SedHopperViewer)]
SedHopperViewerStub := PipeF(SedHopperViewerStub_Origin, SocketDepth(ND_SedHopperViewer) + H_SedInletChannel, [0; 90]*deg, ND_SedHopperViewer, PS_Default)
SedHopperViewerCoupling := CouplingSUBF(SedHopperViewerCoupling_Origin, [0; 270]*deg, ND_SedHopperViewer, PS_Default, ["SedTankCon"])
SedHopperViewerPipe := PipeSUBF(SedHopperViewerPipe_Origin, T_ChannelWall - CouplingLength(ND_SedHopperViewer) + SocketDepth(ND_SedHopperViewer), [0; 270]*deg, ND_SedHopperViewer, PS_Default, ["SedTankCon"])
SedHopperViewerScript := stack(SelectSedRemovables, SedHopperViewerStub, SedRemovableFrz, SelectSedFittings, SedHopperViewerCoupling, SedFittingFrz, SelectSedPipes, SedHopperViewerPipe, SedPipeFrz)
# Outlets to Filter
# Origins and Dimensions
SedOutletCoupling1_Origin(N) := [
    Plant_Origin[0] - L_Sed + W_SedInletChannel + T_SedWeir + ConRadius(ND_FiEntrancePipe);
    Plant_Origin[1] - T_PlantWall + (W_SedBay*N_SedBays + T_SedWallDivider)*N_SedTanks - ConRadius(ND_FiEntrancePipe) - S_Fitting - (N - 1)*W_SedBay - T_PlantWall*floor((N - 1)/N_SedBays);
    Z_SedChannelBottom - SocketDepth(ND_FiEntrancePipe)
]
SedOutletVertPipe_Origin(N) := SedOutletCoupling1_Origin(N) + [0; 0; 2*SocketDepth(ND_FiEntrancePipe) - CouplingLength(ND_FiEntrancePipe)]
L_SedOutletVertPipe := 2*SocketDepth(ND_FiEntrancePipe) + max(0, T_ChannelWall - CouplingLength(ND_FiEntrancePipe))
SedOutletElbow_Origin(N) := SedOutletVertPipe_Origin(N) - [0; 0; L_SedOutletVertPipe]
SedOutletCoupling2_Origin(N) := [
    Plant_Origin[0] - T_PlantWall - L_Sed + CouplingLength(ND_FiEntrancePipe) - SocketDepth(ND_FiEntrancePipe);
    SedOutletElbow_Origin(N)[1];
    -ElbowRadius(ND_FiEntrancePipe) + SedOutletElbow_Origin(N)[2]
]
SedOutletHorizPipe_Origin(N) := [-ElbowRadius(ND_FiEntrancePipe); 0; -ElbowRadius(ND_FiEntrancePipe)] + SedOutletElbow_Origin(N)
# If there are two filters, the second filter runs into the platform with the sed tanks on it. We need to move the outlet pipes to the filter down along the (y axis) outlet channel so that the filter also slides down.
MoveOutletDown :=
    N_Fi - 1 if N_Fi ≥ 2
    0 otherwise
# Sed Outlet Fittings
SedOutletCoupling1Script :=
    Local ← SelectSedFittings
    for i ∈ 1 + MoveOutletDown .. N_FiEntrancePipes + MoveOutletDown
        OutletCoupling ← CouplingSUBF(SedOutletCoupling1_Origin(i), [0; 270]*deg, ND_FiEntrancePipe, PS_Default, ["SedTankCon"])
        Local ← stack(Local, OutletCoupling)
    Local ← stack(Local, SedFittingFrz)
    return Local
move
SedOutletElbowScript :=
    Local ← SelectSedFittings
    for i ∈ 1 + MoveOutletDown .. N_FiEntrancePipes + MoveOutletDown
        OutletElbow ← ElbowSUBF(SedOutletElbow_Origin(i), [0; 0; 270]*deg, ND_FiEntrancePipe, PS_Default, ["SedTankCon"])
        Local ← stack(Local, OutletElbow)
    Local ← stack(Local, SedFittingFrz)
    return Local
SedOutletCoupling2Script :=
    Local ← SelectSedFittings
    for i ∈ 1 + MoveOutletDown .. N_FiEntrancePipes + MoveOutletDown
        OutletCoupling ← CouplingSUBF(SedOutletCoupling2_Origin(i), [0; 0]*deg, ND_FiEntrancePipe, PS_Default, ["SedTankCon"])
        Local ← stack(Local, OutletCoupling)
    Local ← stack(Local, SedFittingFrz)
    return Local
# Sed Outlet Pipes
SedOutletVertPipeScript :=
    Local ← SelectSedPipes
    for i ∈ 1 + MoveOutletDown .. N_FiEntrancePipes + MoveOutletDown
        OutletPipe ← PipeSUBF(SedOutletVertPipe_Origin(i), L_SedOutletVertPipe, [0; 270]*deg, ND_FiEntrancePipe, PS_Default, ["SedTankCon"])
        Local ← stack(Local, OutletPipe)
    Local ← stack(Local, SedPipeFrz)
    return Local
SedOutletHorizPipeScript :=
    Local ← SelectSedPipes
    for i ∈ 1 + MoveOutletDown .. N_FiEntrancePipes + MoveOutletDown
        OutletPipe ← PipeSUBF(SedOutletHorizPipe_Origin(i), SedOutletElbow_Origin(i)[0] - ElbowRadius(ND_FiEntrancePipe) - (Plant_Origin[0] - T_PlantWall - L_Sed + CouplingLength(ND_FiEntrancePipe) - SocketDepth(ND_FiEntrancePipe)), [0; 0]*deg, ND_FiEntrancePipe, PS_Default, ["SedTankCon"])
        Local ← stack(Local, OutletPipe)
    Local ← stack(Local, SedPipeFrz)
    return Local
SedOutletScript := stack(SedOutletCoupling1Script, SedOutletElbowScript, SedOutletCoupling2Script, SedOutletVertPipeScript, SedOutletHorizPipeScript)
# Lamella
# Origins and Dimensions
Lamina_Origin := [
    Plant_Origin[0] - cos(AN_SedPlate)*L_SedPlate;
    Plant_Origin[1];
    Z_SedLamellaBottom + Plant_Origin[2]
]
SedModCap_Origin := Lamina_Origin + [
    ConRadius(ND_SedModulePipe)*cos(AN_SedPlate) - CapThickness(ND_SedModulePipe)*sin(AN_SedPlate) + CapHeight(ND_SedModulePipe)/sin(AN_SedPlate);
    S_Fitting + ConRadius(ND_SedModulePipe);
    ConRadius(ND_SedModulePipe)*sin(AN_SedPlate) + CapThickness(ND_SedModulePipe)*cos(AN_SedPlate)
]
SedModMirrorLineX := SedModCap_Origin[0] - (CapHeight(ND_SedModulePipe) - CapThickness(ND_SedModulePipe))*sin(AN_SedPlate) + (L_SedPlate - B_SedPlate*(N_SedModulePlates - 1)/tan(AN_SedPlate) - 2*(SedModCap_Origin[2] + (CapHeight(ND_SedModulePipe) - CapThickness(ND_SedModulePipe))*cos(AN_SedPlate) - Lamina_Origin[2])/sin(AN_SedPlate))*cos(AN_SedPlate)/2
SedModMirrorLineZ := SedModCap_Origin[2] + (CapHeight(ND_SedModulePipe) - CapThickness(ND_SedModulePipe))*cos(AN_SedPlate) + (L_SedPlate - B_SedPlate*(N_SedModulePlates - 1)/tan(AN_SedPlate) - 2*(SedModCap_Origin[2] + (CapHeight(ND_SedModulePipe) - CapThickness(ND_SedModulePipe))*cos(AN_SedPlate) - Lamina_Origin[2])/sin(AN_SedPlate))*sin(AN_SedPlate)/2
# Lamella
SedLaminaLayer := layer_new("SedModLamella", purple)
MakeSedLamina := BoxF(Lamina_Origin, Lamina_Origin + [-T_SedPlate; W_SedBay; L_SedPlate], [0; 90 deg - AN_SedPlate; 0])
ArraySedLamina := ArrayLast(1, N_SedModulePlates, -B_SedPlate/sin(AN_SedPlate))
SedLaminaFrz := FreezeLayer("SedModLamella")
SedLaminaScript := stack(SedLaminaLayer, MakeSedLamina, ArraySedLamina, SedLaminaFrz)
# Module Connector Caps
SedModCapLayer := layer_new("SedModCapPlu", red)
SedModCapRight := CapF(SedModCap_Origin, [0; 0; 0], ND_SedModulePipe)
SedModCapLeft := CapF(SedModCap_Origin - [
    B_SedPlate*(N_SedModulePlates - 1) + T_SedPlate + 2*(CapHeight(ND_SedModulePipe) - ConRadius(ND_SedModulePipe) + outerradius(ND_SedModulePipe));
    0 m;
    0 m
], [0; 180 deg; 0], ND_SedModulePipe)
SedModCapFrz := FreezeLayer("SedModCapPlu")
SedModCapScript := stack(SedModCapLayer, SedModCapRight, SedModCapLeft, SedModCapFrz)
# Module Connector Pipes and Spacers
SedModPipeLayer := layer_new("SedModPipePlu", blue3)
SedModPipe := PipeF(SedModCap_Origin, B_SedPlate*(N_SedModulePlates - 1) + T_SedPlate + 2*(CapHeight(ND_SedModulePipe) - ConRadius(ND_SedModulePipe) + outerradius(ND_SedModulePipe)), [0; 0; 0], ND_SedModulePipe, PS_Modules)
SedModPipeFrz := FreezeLayer("SedModPipePlu")
SedModSpacerLayer := layer_new("SedModSpacerPlu", blue)
SedModSpacers := PipeF(SedModCap_Origin - [CapHeight(ND_SedModulePipe) + T_SedPlate - CapThickness(ND_SedModulePipe); 0; 0], B_SedPlate - T_SedPlate, [0; 0; 0], ND_SedModulePipeSpacer, PS_Modules)
ArraySedModSpacers := ArrayLast(1, N_SedModulePlates - 1, -B_SedPlate)
SedModSpacerFrz := FreezeLayer("SedModSpacerPlu")
SedModPipeScript := stack(SedModPipeLayer, SedModPipe, SedModPipeFrz, SedModSpacerLayer, SedModSpacers, ArraySedModSpacers, SedModSpacerFrz)
# Rotate and Array Connectors and Array Modules
ThawSedModPiping := ThawMultiple(["SedMod*Plu"])
RotateSedModPiping := Rotate_All([SedModCap_Origin[0]; SedModCap_Origin[2]; SedModCap_Origin[1]], AN_SedPlate - 90 deg)
MirrorSedModPipingUp := MirrorAll([SedModMirrorLineX; SedModMirrorLineZ], [SedModMirrorLineX; SedModMirrorLineZ] + [zc; -zc/tan(AN_SedPlate)], "n")
TripleSedModPiping := array_all(3, 1, (W_SedPlate - 2*(S_Fitting + ConRadius(ND_SedModulePipe)))/2)
ThawSedModLamella := ThawMultiple(["SedModLamella"])
ArraySedMod := array_all(1, N_SedModules, -B_SedPlate*N_SedModulePlates/sin(AN_SedPlate))
FreezeSedModComponents := FreezeMultiple(["SedMod*"])
SedModArrayScript := stack(ThawSedModPiping, view("f"), RotateSedModPiping, MirrorSedModPipingUp, view("t"), TripleSedModPiping, ThawSedModLamella, ArraySedMod, FreezeSedModComponents)
# Plate Settler Support Pipes
SedSupportAFSpace := 1.3 m
SedSupportPipeND := 2 in
N_SedSupportCrossPipe := ceil(L_Sed/SedSupportAFSpace)
SedSupportSpace := L_Sed/N_SedSupportCrossPipe
SedSupportLayer := layer_new("SedModSupportPlu", yellow)
SedSupportPipeTrans1 := PipeF([
    Plant_Origin[0] - SedSupportPipeND/2 - SedSupportSpace;
    Plant_Origin[1] + T_ConcreteMin;
    Z_SedLamellaBottom - SedSupportPipeND/2
], (W_Sed - 2*T_ConcreteMin)/2 - TeeLength(SedSupportPipeND) - SocketDepth(SedSupportPipeND), [-90; 0]*deg, SedSupportPipeND, PS_Default)
SedSupportPipeTrans2 := PipeF([
    Plant_Origin[0] - SedSupportPipeND/2 - SedSupportSpace;
    Plant_Origin[1] + T_ConcreteMin + (W_Sed/2 - T_ConcreteMin - SocketDepth(SedSupportPipeND));
    Z_SedLamellaBottom - SedSupportPipeND/2
], 2*SocketDepth(SedSupportPipeND), [-90; 0]*deg, SedSupportPipeND, PS_Default)
SedSupportPipeTrans3 := PipeF([
    Plant_Origin[0] - SedSupportPipeND/2 - SedSupportSpace;
    Plant_Origin[1] + T_ConcreteMin + (W_Sed - 2*T_ConcreteMin)/2 + TeeLength(SedSupportPipeND) + SocketDepth(SedSupportPipeND);
    Z_SedLamellaBottom - SedSupportPipeND/2
], (W_Sed - 2*T_ConcreteMin)/2 - TeeLength(SedSupportPipeND) - SocketDepth(SedSupportPipeND), [-90; 0]*deg, SedSupportPipeND, PS_Default)
SedSupportPipeTransArray := ArrayLast(1, N_SedSupportCrossPipe - 2, -SedSupportSpace)
SedSupportPipeTransMiddle := stack(SedSupportLayer, SedSupportPipeTrans1, SedSupportPipeTransArray, SedSupportPipeTrans2, SedSupportPipeTransArray, SedSupportPipeTrans3, SedSupportPipeTransArray)
SedSupportPipeTransFront := stack(PipeF([
    Plant_Origin[0] - SedSupportPipeND/2;
    Plant_Origin[1] + T_ConcreteMin;
    Z_SedLamellaBottom - SedSupportPipeND/2
], W_Sed/2 - T_ConcreteMin - TeeLength(SedSupportPipeND) - SocketDepth(SedSupportPipeND), [-90; 0]*deg, SedSupportPipeND, PS_Default), PipeF([
    Plant_Origin[0] - SedSupportPipeND/2;
    Plant_Origin[1] + T_ConcreteMin + ((W_Sed - 2*T_ConcreteMin)/2 - SocketDepth(SedSupportPipeND));
    Z_SedLamellaBottom - SedSupportPipeND/2
], (W_Sed/2 - T_ConcreteMin) + SocketDepth(SedSupportPipeND), [-90; 0]*deg, SedSupportPipeND, PS_Default))
SedSupportPipeTransEnd :=
    Script ← SelectLayer("SedModSupportPlu")
    for i ∈ N_SedSupportCrossPipe
        if mod(i, 2) == 1
            SedSupportPipeTrans ← stack(PipeF([
                Plant_Origin[0] - SedSupportPipeND/2 - (i - 1)*SedSupportSpace;
                Plant_Origin[1] + T_ConcreteMin;
                Z_SedLamellaBottom - SedSupportPipeND/2
            ], W_Sed/2 - T_ConcreteMin + SocketDepth(SedSupportPipeND), [-90; 0]*deg, SedSupportPipeND, PS_Default), PipeF([
                Plant_Origin[0] - SedSupportPipeND/2 - (i - 1)*SedSupportSpace;
                Plant_Origin[1] + T_ConcreteMin + W_Sed/2 - T_ConcreteMin + TeeLength(SedSupportPipeND) + SocketDepth(SedSupportPipeND);
                Z_SedLamellaBottom - SedSupportPipeND/2
            ], W_Sed/2 - T_ConcreteMin - TeeLength(SedSupportPipeND), [-90; 0]*deg, SedSupportPipeND, PS_Default))
        otherwise
            SedSupportPipeTrans ← stack(PipeF([
                Plant_Origin[0] - SedSupportPipeND/2 - (i - 1)*SedSupportSpace;
                Plant_Origin[1] + T_ConcreteMin;
                Z_SedLamellaBottom - SedSupportPipeND/2
            ], W_Sed/2 - T_ConcreteMin - TeeLength(SedSupportPipeND) - SocketDepth(SedSupportPipeND), [-90; 0]*deg, SedSupportPipeND, PS_Default), PipeF([
                Plant_Origin[0] - SedSupportPipeND/2 - (i - 1)*SedSupportSpace;
                Plant_Origin[1] + T_ConcreteMin + ((W_Sed - 2*T_ConcreteMin)/2 - SocketDepth(SedSupportPipeND));
                Z_SedLamellaBottom - SedSupportPipeND/2
            ], (W_Sed/2 - T_ConcreteMin) + SocketDepth(SedSupportPipeND), [-90; 0]*deg, SedSupportPipeND, PS_Default))
        Script ← stack(Script, SedSupportPipeTrans)
    return Script
SedSupportPipeLong :=
    Script ← SelectLayer("SedModSupportPlu")
    for i ∈ 1 .. N_SedSupportCrossPipe - 1
        if mod(i, 2) == 1
            SedSupportPipeLong ← PipeF([
                Plant_Origin[0] - SedSupportPipeND/2 - TeeLength(SedSupportPipeND)/2 - (i - 1)*SedSupportSpace;
                Plant_Origin[1] + W_Sed/2 - TeeLength(SedSupportPipeND)/2 - SocketDepth(SedSupportPipeND);
                Z_SedLamellaBottom - SedSupportPipeND/2
            ], SedSupportSpace - TeeLength(SedSupportPipeND), [0; 0]*deg, SedSupportPipeND, PS_Default)
        otherwise
            SedSupportPipeLong ← PipeF([
                Plant_Origin[0] - SedSupportPipeND/2 - TeeLength(SedSupportPipeND)/2 - (i - 1)*SedSupportSpace;
                (Plant_Origin[1] + W_Sed/2 + TeeLength(SedSupportPipeND)/2) + SocketDepth(SedSupportPipeND);
                Z_SedLamellaBottom - SedSupportPipeND/2
            ], SedSupportSpace - TeeLength(SedSupportPipeND), [0; 0]*deg, SedSupportPipeND, PS_Default)
        Script ← stack(Script, SedSupportPipeLong)
    return Script
SedSupportTees :=
    Script ← layer_new("SedModSupportTees", green)
    for i ∈ 1 .. N_SedSupportCrossPipe - 1
        if mod(i, 2) == 1
            SedSupportTees ← stack(TeeF([
                Plant_Origin[0] - SedSupportPipeND/2 - TeeLength(SedSupportPipeND)/2 - (i - 1)*SedSupportSpace;
                Plant_Origin[1] + W_Sed/2 - TeeLength(SedSupportPipeND)/2 - SocketDepth(SedSupportPipeND);
                Z_SedLamellaBottom - SedSupportPipeND/2
            ], [90; 0; 0]*deg, SedSupportPipeND, PS_Default), Mirror3dLast("yz", [
                Plant_Origin[0] - SedSupportPipeND/2 - (i - 1)*SedSupportSpace - SedSupportSpace/2;
                Plant_Origin[1] + W_Sed/2 - TeeLength(SedSupportPipeND)/2 - SocketDepth(SedSupportPipeND);
                Z_SedLamellaBottom - SedSupportPipeND/2
            ], "n"))
        otherwise
            SedSupportTees ← stack(TeeF([
                Plant_Origin[0] - SedSupportPipeND/2 - TeeLength(SedSupportPipeND)/2 - (i - 1)*SedSupportSpace;
                (Plant_Origin[1] + W_Sed/2) + TeeLength(SedSupportPipeND)/2 + SocketDepth(SedSupportPipeND);
                Z_SedLamellaBottom - SedSupportPipeND/2
            ], [90; 0; 0]*deg, SedSupportPipeND, PS_Default), Mirror3dLast("yz", [
                Plant_Origin[0] - SedSupportPipeND/2 - (i - 1)*SedSupportSpace - SedSupportSpace/2;
                Plant_Origin[1] + W_Sed/2 - TeeLength(SedSupportPipeND)/2 - SocketDepth(SedSupportPipeND);
                Z_SedLamellaBottom - SedSupportPipeND/2
            ], "n"))
        Script ← stack(Script, SedSupportTees)
    return Script
SedSupportPipe := stack(SedSupportPipeTransMiddle, SedSupportPipeTransFront, FreezeLayer("SedModSupportPlu"), SedSupportPipeTransEnd, FreezeLayer("SedModSupportPlu"), SedSupportPipeLong, FreezeLayer("SedModSupportPlu"))
SedSupportTeeConnections := stack(SedSupportTees, FreezeLayer("SedModSupportTees"))
SedSupport := stack(SedSupportPipe, SedSupportTeeConnections)
SedLamellaScript := stack(SedLaminaScript, SedModCapScript, SedModPipeScript, SedModArrayScript, SedSupport)
# Inlet Channel Drain
# Origins and Dimensions
SedIChannelDrainVertCoupling_Origin := [
    Plant_Origin[0] - L_Sed - T_PlantWall + max(T_PlantWall, CouplingLength(ND_SedInletChannelDrain)) + SocketDepth(ND_SedInletChannelDrain) + ElbowRadius(ND_SedInletChannelDrain);
    Plant_Origin[1] + S_Fitting + ConRadius(ND_SedInletChannelDrain);
    Plant_Origin[2] + Z_SedChannelBottom - CouplingLength(ND_SedInletChannelDrain) + SocketDepth(ND_SedInletChannelDrain)
]
L_SedIChannelVertPipe := Z_SedChannelBottom - CouplingLength(ND_SedInletChannelDrain) - ElbowRadius(ND_SedInletChannelDrain) - ConRadius(ND_SedInletChannelDrain)
L_SedIChannelHorizPipe := SedIChannelDrainVertCoupling_Origin[0] - (Plant_Origin[0] - L_Sed - T_PlantWall) - CouplingLength(ND_SedInletChannelDrain) + SocketDepth(ND_SedInletChannelDrain) - ElbowRadius(ND_SedInletChannelDrain)
SedIChannelDrainHorizCoupling_Origin := [
    Plant_Origin[0] - T_PlantWall - SocketDepth(ND_SedExitChannelDrain) - L_Sed + CouplingLength(ND_SedExitChannelDrain);
    SedIChannelDrainVertCoupling_Origin[1];
    SedIChannelDrainVertCoupling_Origin[2] - L_SedIChannelVertPipe - ElbowRadius(ND_SedExitChannelDrain)
]
# Inlet Channel Drain Fittings
SedIChannelDrainVertCoupling := CouplingSUBF(SedIChannelDrainVertCoupling_Origin, [0; 90; 0]*deg, ND_SedInletChannelDrain, PS_Default, ["SedTankCon"])
SedIChannelDrainElbow := ElbowSUBF(SedIChannelDrainVertCoupling_Origin + [0 m; 0 m; -L_SedIChannelVertPipe], [0; 0; 270]*deg, ND_SedInletChannelDrain, PS_Default, ["SedTankCon"])
SedIChannelHorizCoupling := CouplingSUBF(SedIChannelDrainHorizCoupling_Origin, [0; 0; 0]*deg, ND_SedExitChannelDrain, PS_Default, ["SedTankCon"])
SedInletChannelDrainFittingScript := stack(SelectSedFittings, SedIChannelDrainVertCoupling, SedIChannelDrainElbow, SedIChannelHorizCoupling, SedFittingFrz)
distancefromflocweir := Z_SedChannelBottom - T_ChannelWall - Z_SedFlocWeir = 41.5649 cm
# Inlet Channel Drain Pipes
SedIChannelDrainHorizPipe := PipeSUBF([
    SedIChannelDrainVertCoupling_Origin[0] - ElbowRadius(ND_SedInletChannelDrain);
    SedIChannelDrainVertCoupling_Origin[1];
    SedIChannelDrainHorizCoupling_Origin[2]
], L_SedIChannelHorizPipe, [0; 0; 0]*deg, ND_SedInletChannelDrain, PS_Default, ["SedTankCon"])
SedIChannelDrainVertPipe := PipeSUBF(SedIChannelDrainVertCoupling_Origin, L_SedIChannelVertPipe, [0; 270; 0]*deg, ND_SedInletChannelDrain, PS_Default, ["SedTankCon"])
SedIChannelDrainStub := PipeF(SedIChannelDrainVertCoupling_Origin + [0 m; 0 m; CouplingLength(ND_SedInletChannelDrain) - 2*SocketDepth(ND_SedInletChannelDrain)], H_SedInletChannel + SocketDepth(ND_SedInletChannelDrain), [0; 90; 0]*deg, ND_SedInletChannelDrain, PS_Default)
SedInletChannelDrainPipeScript := stack(SelectSedPipes, SedIChannelDrainHorizPipe, SedIChannelDrainVertPipe, SedPipeFrz, SelectSedRemovables, SedIChannelDrainStub, SedRemovableFrz)
SedInletDrainScript := stack(SedInletChannelDrainFittingScript, SedInletChannelDrainPipeScript)
