# Sedimentation Tank Drawing
ND_SedMod := ND_SedModulePipe
S_SedLaminaPipeToEdge := 5 cm
ND_SedModSpacer := ND_SedModulePipeSpacer
# Layers
SedTankLayer := layer_new("SedTankCon", grey)
SedValveLayer := layer_new("SedValvePlu", blue3)
SelectSedCon := SelectLayer("SedTankCon")
SelectSedValves := SelectLayer("SedValvePlu")
SedConFrz := FreezeLayer("SedTankCon")
SedValveFrz := FreezeLayer("SedValvePlu")
SedPipeLayer := layer_new("SedPipePlu", blue)
SedAdapterLayer := layer_new("SedAdapterPlu", blue2)
SelectSedPipes := SelectLayer("SedPipePlu")
SelectSedAdapters := SelectLayer("SedAdapterPlu")
SedPipeFrz := FreezeLayer("SedPipePlu")
SedAdapterFrz := FreezeLayer("SedAdapterPlu")
SedFittingLayer := layer_new("SedFittingPlu", green)
SedJetReverser_Layer := layer_new("SedJetReverserPlu", blue)
SelectSedFittings := SelectLayer("SedFittingPlu")
SedJetReverserFrz := FreezeLayer("SedJetReverserPlu")
SedFittingFrz := FreezeLayer("SedFittingPlu")
SedInletRemovables := layer_new("SedInletRemovables", red)
SedFerncoLayer := layer_new("SedFerncoPlu", purple)
SedInletRemovablesSelect := SelectLayer("SedInletRemovables")
SelectSedFerncos := SelectLayer("SedFerncoPlu")
SedFerncoFrz := FreezeLayer("SedFerncoPlu")
SedInletRemovablesFrz := FreezeLayer("SedInletRemovables")
SedLaunderRemovableLayer := layer_new("SedLaunderRemovablePlu", red)
SelectLaunderSedRemovables := SelectLayer("SedLaunderRemovablePlu")
SedLaunderRemovableFrz := FreezeLayer("SedLaunderRemovablePlu")
DrainPipeBoxLayer := layer_new("DrainPipeBox", grey)
SedModPipeLayer := layer_new("SedModPipePlu", blue3)
DrainPipeBoxFrz := FreezeLayer("DrainPipeBox")
SedModPipeFrz := FreezeLayer("SedModPipePlu")
SedModSpacerLayer := layer_new("SedModSpacerPlu", blue)
SedModSpacerFrz := FreezeLayer("SedModSpacerPlu")
SedLaminaLayer := layer_new("SedModLamella", purple)
SedLaminaFrz := FreezeLayer("SedModLamella")
SedModCapLayer := layer_new("SedModCapPlu", red)
SedModCapFrz := FreezeLayer("SedModCapPlu")
SedPlateFrameFittingsLayer := layer_new("SedPlateFrameFittingsPlu", green)
SedPlateFrameFittingsFrz := FreezeLayer("SedPlateFrameFittingsPlu")
SedPlateFramePipesLayer := layer_new("SedPlateFramePipesPlu", blue)
SedPlateFramePipesFrz := FreezeLayer("SedPlateFramePipesPlu")
SedDiffLayer := layer_new("SedManDiffuserPlu", blue)
SedDiffuserFreeze := FreezeLayer("SedManDiffuserPlu")
SedDiffSelect := SelectLayer("SedManDiffuserPlu")
SedInletDrainRemovables := layer_new("SedInletDrainRemovables", red)
SedExitDrainRemovables := layer_new("SedExitDrainRemovables", red)
SedInletDrainRemovablesSelect := SelectLayer("SedInletDrainRemovables")
SedExitDrainRemovablesSelect := SelectLayer("SedExitDrainRemovables")
SedInletDrainRemovablesFrz := FreezeLayer("SedInletDrainRemovables")
SedExitDrainRemovablesFrz := FreezeLayer("SedExitDrainRemovables")
SedToFiPipeLayer := layer_new("SedToFiPipePlu", blue)
SelectSedToFitPipe := SelectLayer("SedToFiPipePlu")
SedToFiPipeFrz := FreezeLayer("SedToFiPipePlu")
# Sedimentation Tank Concrete (excluding lamella support ledge)
# Side Slopes and Launder Support Ledge
# Draw as a channel so that it can be arrayed. All side walls at end.
DrawSedTank := ChannelDrawingPlus(Plant_Origin + [-L_Sed; W_Sed + T_PlantWall; -outerdiameter(ND_SedJetReverser)], [W_Sed + 2*T_SedWallDivider; L_Sed; Z_Sed], T_PlantWall, T_SedTankBottomSlab, [270; 0; 0]*deg)
DrawSedTank := Tank(Plant_Origin + [0 m; 0 m; -outerradius(ND_SedJetReverser)], [L_Sed; W_Sed; H_Sed], T_PlantWall)
SubtractFromSedCon := SubtractF(["SedTankCon"], "DeleteMe")
SedSlopePolyline := Pline3D([
    [Plant_Origin[0]; Plant_Origin[1] + W_Sed; Plant_Origin[2] - outerdiameter(ND_SedJetReverser)] + [0 m; 0 m; 0 m];
    [Plant_Origin[0]; Plant_Origin[1] + W_Sed; Plant_Origin[2] - outerdiameter(ND_SedJetReverser)] + [0 m; 0 m; outerradius(ND_SedJetReverser) + H_SedSideSlopes];
    [Plant_Origin[0]; Plant_Origin[1] + W_Sed; Plant_Origin[2] - outerdiameter(ND_SedJetReverser)] + [0 m; -W_Sed/2 + innerdiameter(ND_SedJetReverser/2, PS_Default); outerradius(ND_SedJetReverser)];
    [Plant_Origin[0]; Plant_Origin[1] + W_Sed; Plant_Origin[2] - outerdiameter(ND_SedJetReverser)] + [0 m; -W_Sed/2 - innerdiameter(ND_SedJetReverser/2, PS_Default); outerradius(ND_SedJetReverser)];
    [Plant_Origin[0]; Plant_Origin[1] + W_Sed; Plant_Origin[2] - outerdiameter(ND_SedJetReverser)] + [0 m; -W_Sed; outerradius(ND_SedJetReverser) + H_SedSideSlopes];
    [Plant_Origin[0]; Plant_Origin[1] + W_Sed; Plant_Origin[2] - outerdiameter(ND_SedJetReverser)] + [0 m; -W_Sed; 0 m];
    [Plant_Origin[0]; Plant_Origin[1] + W_Sed; Plant_Origin[2] - outerdiameter(ND_SedJetReverser)] + [0 m; 0 m; 0 m]
])
ExtrudeSedSlopes := ExtrudeLast(-L_SedUpflow)
SedLaunderLedge := BoxF([0; W_Sed - 1/2*W_Sed + ConRadius(ND_SedLaunder); Z_SedLaunder - ConRadius(ND_SedLaunder)] + Plant_Origin, [
    -2*SocketDepth(ND_SedLaunder);
    W_Sed - 1/2*W_Sed - ConRadius(ND_SedLaunder);
    Z_SedLaunder - ConRadius(ND_SedLaunder) - T_ConcreteMin
] + Plant_Origin, [0; 0; 0]*deg)
SedFlocWeirBox := BoxF([Plant_Origin[0] - L_SedUpflow - T_SedWeir; Plant_Origin[1] - zc; Plant_Origin[2] + Z_SedFlocWeir], [
    Plant_Origin[0] - L_SedUpflow;
    Plant_Origin[1] + W_Sed + zc;
    Plant_Origin[2] - outerdiameter(ND_SedJetReverser)
], [0; 0; 0]*deg)
SedConScript1 := stack(SedTankLayer, DrawSedTank, SedSlopePolyline, ExtrudeSedSlopes, SedLaunderLedge, SedFlocWeirBox)
# Lamella support ledges
SedLamellaSupportLedge1 := BoxF(Plant_Origin + [0 m; 0 m; Z_SedLamellaSupportLedge - T_ConcreteMin], Plant_Origin + [-L_SedUpflow; T_ConcreteMin; Z_SedLamellaSupportLedge], [0; 0; 0]*deg)
SedLamellaSupportLedge2 := BoxF(Plant_Origin + [0 m; W_Sed; Z_SedLamellaSupportLedge - T_ConcreteMin], Plant_Origin + [-L_SedUpflow; W_Sed - T_ConcreteMin; Z_SedLamellaSupportLedge], [0; 0; 0]*deg)
SedLamellaLedgeScript := stack(SedLamellaSupportLedge1, SedLamellaSupportLedge2)
# Floc Hopper Front and Back Slopes
SedHopperFrontBackPline := Pline3D([
    [Plant_Origin[0] - L_Sed; Plant_Origin[1]; Plant_Origin[2] - outerdiameter(ND_SedJetReverser)];
    [
        Plant_Origin[0] - L_Sed + L_SedHopper;
        Plant_Origin[1];
        Plant_Origin[2] - outerdiameter(ND_SedJetReverser)
    ];
    [
        Plant_Origin[0] - L_Sed + L_SedHopper;
        Plant_Origin[1];
        Plant_Origin[2] + Z_SedHopperBottom + H_SedHopperFrontSlope
    ];
    [Plant_Origin[0] + X_SedHopperBottom; Plant_Origin[1]; Plant_Origin[2] + Z_SedHopperBottom];
    [
        Plant_Origin[0] - L_Sed;
        Plant_Origin[1];
        Plant_Origin[2] + Z_SedHopperBottom + H_SedHopperBackSlope
    ];
    [Plant_Origin[0] - L_Sed; Plant_Origin[1]; Plant_Origin[2] - outerdiameter(ND_SedJetReverser)]
])
ExtrudeSedHopperFrontBack := ExtrudeLast(-W_Sed)
SedHopperSidePline := Pline3D([
    [Plant_Origin[0] - L_SedUpflow - T_SedWeir; Plant_Origin[1]; Plant_Origin[2]] + [0 m; 0 m; -outerdiameter(ND_SedJetReverser)];
    [Plant_Origin[0] - L_SedUpflow - T_SedWeir; Plant_Origin[1]; Plant_Origin[2]] + [0 m; W_Sed; -outerdiameter(ND_SedJetReverser)];
    [Plant_Origin[0] - L_SedUpflow - T_SedWeir; Plant_Origin[1]; Plant_Origin[2]] + [0 m; W_Sed; Z_SedHopperSideSlope];
    [Plant_Origin[0] - L_SedUpflow - T_SedWeir; Plant_Origin[1]; Plant_Origin[2]] + [
        0 m;
        3*S_Fitting + 2*ConRadius(ND_SedInletChannelDrain) + outerdiameter(ND_SedHopperDrain);
        Z_SedHopperBottom
    ];
    [Plant_Origin[0] - L_SedUpflow - T_SedWeir; Plant_Origin[1]; Plant_Origin[2]] + [0 m; 3*S_Fitting + 2*ConRadius(ND_SedInletChannelDrain); Z_SedHopperBottom];
    [Plant_Origin[0] - L_SedUpflow - T_SedWeir; Plant_Origin[1]; Plant_Origin[2]] + [0 m; 0 m; Z_SedHopperSideSlope];
    [Plant_Origin[0] - L_SedUpflow - T_SedWeir; Plant_Origin[1]; Plant_Origin[2]] + [0 m; 0 m; -outerdiameter(ND_SedJetReverser)]
])
ExtrudeSedHopperSides := ExtrudeLast(-L_SedHopper)
SedHopperScript := stack(SedHopperFrontBackPline, ExtrudeSedHopperFrontBack, SedHopperSidePline, ExtrudeSedHopperSides)
SedConScript := stack(SedConScript1, SedLamellaLedgeScript, SedHopperScript, SedConFrz)
# Jet Reverser and Sludge Drain
# Origins and Dimensions
SedJetReverser_Origin := Plant_Origin + [0 m; W_Sed/2; -outerradius(ND_SedJetReverser)]
# the ten centimeters to ensure you can wrap your hand between two valves
L_SedJetReverserPipe := L_Sed + T_PlantWall + 2*MaleAdapterLength(ND_SedHopperDrain) + ValveLength(ND_SedHopperDrain) + SocketDepth(ND_SedHopperDrain) + ElbowRadius(ND_SedHopperDrain) + ConRadius(ND_SedHopperDrain)
SedSludgeDrainAdapter1_Origin := SedJetReverser_Origin + [-L_SedJetReverserPipe; 0 m; 0 m]
SedSludgeDrainAdapter2_Origin := SedSludgeDrainAdapter1_Origin + [
    -2*MaleAdapterLength(ND_SedJetReverser) - ValveLength(ND_SedJetReverser) + 2*SocketDepth(ND_SedJetReverser) + 2*ValveSocket(ND_SedJetReverser);
    0 m;
    0 m
]
SedSludgeDrainValve_Origin := SedSludgeDrainAdapter1_Origin + [
    -MaleAdapterLength(ND_SedJetReverser) + SocketDepth(ND_SedJetReverser) + ValveSocket(ND_SedJetReverser);
    0 m;
    0 m
]
SedSludgeDrainElbow_Origin := SedSludgeDrainAdapter2_Origin + [-2*SocketDepth(ND_SedJetReverser); 0 m; 0 m]
# Jet Reverser Pipe
SedJetReverser := PipeSUBF(SedJetReverser_Origin, L_SedJetReverserPipe, [0; 0]*deg, ND_SedJetReverser, PS_Default, ["SedTankCon"])
SedJetReverserCut := BoxF(SedJetReverser_Origin + [0 m; -outerradius(ND_SedJetReverser); 0 m], SedJetReverser_Origin + [-L_SedUpflow; outerradius(ND_SedJetReverser); outerradius(ND_SedJetReverser)], [0; 0; 0]*deg)
SubtractFromSedJetReverser := SubtractF(["SedJetReverserPlu"], "DeleteMe")
SedJetReverserScript := stack(SedJetReverser_Layer, SedJetReverser, SedJetReverserFrz, SedJetReverserCut, GroupDelete, SubtractFromSedJetReverser)
# Sludge Drain Fittings
SedSludgeDrainAdapter1 := MaleAdapterF(SedSludgeDrainAdapter1_Origin, [0; 0]*deg, ND_SedJetReverser, PS_Default)
SedSludgeDrainAdapter2 := MaleAdapterF(SedSludgeDrainAdapter2_Origin, [180; 0]*deg, ND_SedJetReverser, PS_Default)
SedSludgeDrainValve := insertdwg("https://confluence.cornell.edu/download/attachments/173604905/Sed-Scaled-Gate-Valve-Threaded.dwg", SedSludgeDrainValve_Origin, 2*outerradius(ND_SedJetReverser)/(1.16 m), 2*outerradius(ND_SedJetReverser)/(1.16 m), 0 deg)
SedSludgeDrainElbow := ElbowF(SedSludgeDrainElbow_Origin, [90; 0; 45]*deg, ND_SedJetReverser, PS_Default)
SedSludgeDrainNipple := PipeF(SedSludgeDrainAdapter2_Origin, 2*SocketDepth(ND_SedJetReverser), [0; 0]*deg, ND_SedJetReverser, PS_Default)
SedSludgeDrainFittingScript := stack(SedAdapterLayer, SedSludgeDrainAdapter1, SedSludgeDrainAdapter2, SedAdapterFrz, SedValveLayer, SedSludgeDrainValve, SedValveFrz, SedFittingLayer, SedSludgeDrainElbow, SedFittingFrz, SedPipeLayer, SedSludgeDrainNipple, SedPipeFrz)
SedSludgeDrainScript := stack(SedJetReverserScript, SedSludgeDrainFittingScript)
# Inlet Manifold
# Origins and Dimensions
SedManElbow_Origin := Plant_Origin + [
    -L_Sed + S_Fitting + ConRadius(ND_SedManifold);
    W_Sed/2 + L_SedManifoldOffset + ElbowRadius(ND_SedManifold);
    Z_SedManifoldPipe
]
SedManPipe1_Origin := SedManElbow_Origin
L_SedManPipe1 := W_Sed/2 + T_PlantWall - L_SedManifoldOffset - ElbowRadius(ND_SedManifold)
SedManPipe2_Origin := Plant_Origin + [-L_SedUpflow + L_SedManConnectionStub - 1 mm; W_Sed/2 + L_SedManifoldOffset; Z_SedManifoldPipe]
# Subtracted 1mm so that there would be a visible space between the two horizontal pipes to show that they are separate
L_SedManPipe2 := L_SedHopper + T_SedWeir + L_SedManConnectionStub - S_Fitting - ConRadius(ND_SedManifold) - ElbowRadius(ND_SedManifold) - 1 mm
SedManPipe3_Origin := Plant_Origin + [
    -CapThickness(ND_SedManifold) - L_SedManifoldPipeFromTankEnd;
    W_Sed/2 + L_SedManifoldOffset;
    Z_SedManifoldPipe
]
L_SedManPipe3 := L_SedUpflow - L_SedManConnectionStub - L_SedManifoldPipeFromTankEnd - CapThickness(ND_SedManifold)
SedManCap_Origin := SedManPipe3_Origin
# Manifold Pipes
SedManPipe1 := PipeSUBF(SedManPipe1_Origin, L_SedManPipe1, [-90; 0]*deg, ND_SedManifold, PS_Default, ["SedTankCon"])
SedManPipe2 := PipeSUBF(SedManPipe2_Origin, L_SedManPipe2, [0; 0]*deg, ND_SedManifold, PS_Default, ["SedTankCon"])
SedManPipe3 := PipeF(SedManPipe3_Origin, L_SedManPipe3, [0; 0]*deg, ND_SedManifold, PS_Default)
SedManPipeScript := stack(SelectSedPipes, SedManPipe1, SedManPipe2, SedManPipe3, SedPipeFrz)
# Manifold Fittings
SedManElbow := ElbowSUBF(SedManElbow_Origin, [180; 0; 0]*deg, ND_SedManifold, PS_Default, ["SedTankCon"])
SedManCap := CapF(SedManCap_Origin, [0; 0; 0]*deg, ND_SedManifold)
SedManFernco := FerncoCouplingF(SedManPipe2_Origin + [L_SedManFirstDiffuserGap + 1 mm; 0 m; 0 m], [0; 0; 0]*deg, ND_SedManifold, L_SedManConnectionStub + L_SedManFirstDiffuserGap)
SedManFittingScript := stack(SelectSedFittings, SedManCap, SedManElbow, SedFittingFrz, SedFerncoLayer, SedManFernco, SedFerncoFrz)
# Manifold Orifices
SedManOrifice := CylinderF(SedManPipe3_Origin + [-L_SedManPipe3 + L_SedManFirstDiffuserGap + outerradius(ND_SedDiffuser); 0 m; 0 m], outerradius(ND_SedDiffuser), outerradius(ND_SedManifold) + zc, [0; 270]*deg)
ArraySedManOrifice := array_all(1, N_SedManifoldPorts, B_SedDiffuser)
# Air Vent Holes
SedManAirVent := CylinderF([
    Plant_Origin[0] - (N_SedAirVents*B_AirVentHoles + L_SedManifoldPipeFromTankEnd + L_SedDiffusersToEnd + CapThickness(ND_SedManifold));
    SedManPipe_Origin[1];
    SedManPipe_Origin[2] + outerradius(ND_SedManifold) + ND_SedManifold/4
], D_AirVentHoles/2, ND_SedManifold/2, [0; 270]*deg)
ArraySedManAirVent := array_all(1, N_SedAirVents, B_AirVentHoles)
SubtractFromSedPipes := SubtractF(["SedPipePlu"], "DeleteMe")
SubtractFromSedFittings := SubtractF(["SedFittingPlu"], "DeleteMe")
SedManOrificeScript := stack(SedManOrifice, ArraySedManOrifice, GroupDelete, SubtractFromSedPipes, SedManOrifice, ArraySedManOrifice, GroupDelete, SubtractFromSedFittings)
SedManifoldScript := stack(SedManPipeScript, SedManFittingScript, SedManOrificeScript)
# Exit Launder
# Origins and Dimensions
SedLaunderPipe1_Origin := Plant_Origin + [-L_Sed + S_Fitting + ConRadius(ND_SedManifold); -T_PlantWall; Z_SedLaunder]
SedLaunderPipe2_Origin := Plant_Origin + [
    -L_Sed + S_Fitting + ConRadius(ND_SedManifold) + ElbowRadius(ND_SedManifold);
    1/2*W_Sed;
    Z_SedLaunder
]
SedLaunderCap_Origin := SedLaunderPipe2_Origin + [L_SedLaunder; 0 m; 0 m]
SedLaunderElbow_Origin := SedLaunderPipe2_Origin
# Launder Fittings
SedLaunderEndCap := CapF(SedLaunderCap_Origin, [0; 0]*deg, ND_SedLaunder)
SedLaunderElbow := ElbowF(SedLaunderElbow_Origin, [90; 0; 0]*deg, ND_SedLaunder, PS_Default)
SedLaunderFittingScript := stack(SelectSedFittings, SedLaunderEndCap, SedLaunderElbow, SedFittingFrz)
# Launder Pipes
SedLaunderPipe1 := PipeSUBF(SedLaunderPipe1_Origin, W_Sed/2 + T_PlantWall - ElbowRadius(ND_SedLaunder), [-90; 0]*deg, ND_SedLaunder, PS_Default, ["SedTankCon"])
SedLaunderPipe2 := PipeF(SedLaunderPipe2_Origin, L_SedLaunder, [0; 180]*deg, ND_SedLaunder, PS_Default)
SedLaunderPipeScript := stack(SelectSedPipes, SedLaunderPipe1, SedLaunderPipe2, SedPipeFrz)
# Launder Orifices
SedLaunderOrifice := CylinderF([L_SedLaunder - L_SedLaunderEndToOrifice; 0 m; 0 m] + SedLaunderPipe2_Origin, D_SedLaunderOrifice/2, outerradius(ND_SedLaunder) + zc, [0; 90]*deg)
ArraySedLaunderOrifices := array_all(1, N_SedLaunderOrifices, -B_SedLaunderOrifices)
SedLaunderOrificeScript := stack(SedLaunderOrifice, ArraySedLaunderOrifices, GroupDelete, SubtractFromSedPipes, SedLaunderOrifice, ArraySedLaunderOrifices, GroupDelete, SubtractFromSedFittings)
SedLaunderScript := stack(SedLaunderFittingScript, SedLaunderPipeScript, SedLaunderOrificeScript)
# Floc Hopper Drain
# Origins
SedHopperDrainAdapter1_Origin := Plant_Origin + [
    -L_Sed - T_PlantWall - SocketDepth(ND_SedHopperDrain);
    3*S_Fitting + 2*ConRadius(ND_SedInletChannelDrain) + outerradius(ND_SedHopperDrain);
    Z_SedHopperBottom + outerradius(ND_SedHopperDrain)
]
SedHopperDrainValve_Origin := SedHopperDrainAdapter1_Origin + [
    -MaleAdapterLength(ND_SedHopperDrain) + ValveSocket(ND_SedHopperDrain) + SocketDepth(ND_SedHopperDrain);
    0 m;
    0 m
]
SedHopperDrainAdapter2_Origin := SedHopperDrainValve_Origin + [
    ValveSocket(ND_SedHopperDrain) - ValveLength(ND_SedHopperDrain) + SocketDepth(ND_SedHopperDrain) - MaleAdapterLength(ND_SedHopperDrain);
    0 m;
    0 m
]
SedHopperDrainElbow_Origin := SedHopperDrainAdapter2_Origin + [-2*SocketDepth(ND_SedHopperDrain); 0 m; 0 m]
SedHopperDrainPipe_Origin := [
    Plant_Origin[0] - L_SedUpflow - T_SedWeir - L_SedHopper/2;
    SedHopperDrainAdapter1_Origin[1];
    SedHopperDrainAdapter1_Origin[2]
]
# Hopper Drain Pipes
SedHopperDrainNipple1 := PipeF(SedHopperDrainAdapter1_Origin + [2*SocketDepth(ND_SedHopperDrain); 0; 0], 2*SocketDepth(ND_SedHopperDrain), [0; 0]*deg, ND_SedHopperDrain, PS_Default)
SedHopperDrainNipple2 := PipeF(SedHopperDrainAdapter2_Origin, 2*SocketDepth(ND_SedHopperDrain), [0; 0]*deg, ND_SedHopperDrain, PS_Default)
L_SedHopperDrainPipe := L_SedHopper/2 + T_PlantWall + SocketDepth(ND_SedHopperDrain)
SedHopperDrainPipe := PipeSUBF(SedHopperDrainPipe_Origin, L_SedHopperDrainPipe, [0; 0]*deg, ND_SedHopperDrain, PS_Default, ["SedTankCon"])
SedHopperDrainPipeWedge := WedgeF([0; outerradius(ND_SedHopperDrain); outerradius(ND_SedHopperDrain)] + SedHopperDrainPipe_Origin, [
    -2*outerradius(ND_SedHopperDrain)/tan(AN_SedHopperSlope);
    -outerradius(ND_SedHopperDrain);
    -outerradius(ND_SedHopperDrain)
] + SedHopperDrainPipe_Origin, [0; 0; 0])
SubtractSedHopperDrainPipeWedge := SubtractF(["SedPipePlu"], "DeleteMe")
SedHopperDrainPipeScript := stack(SelectSedPipes, SedHopperDrainNipple1, SedHopperDrainNipple2, SedHopperDrainPipe, SedPipeFrz, SedHopperDrainPipeWedge, GroupDelete, SubtractSedHopperDrainPipeWedge)
# Hopper Drain Fittings
SedHopperDrainElbow := ElbowF(SedHopperDrainElbow_Origin, [90; 0; 45]*deg, ND_SedHopperDrain, PS_Default)
SedHopperDrainAdapter1 := MaleAdapterF(SedHopperDrainAdapter1_Origin, [0; 0]*deg, ND_SedHopperDrain, PS_Default)
SedHopperDrainAdapter2 := MaleAdapterF(SedHopperDrainAdapter2_Origin, [180; 0]*deg, ND_SedHopperDrain, PS_Default)
SedHopperDrainValve := insertdwg("https://confluence.cornell.edu/download/attachments/173604905/Sed-Scaled-Gate-Valve-Threaded.dwg", SedHopperDrainValve_Origin, 2*outerradius(ND_SedHopperDrain)/(1.16 m), 2*outerradius(ND_SedHopperDrain)/(1.16 m), 0 deg)
SedHopperDrainFittingScript := stack(SelectSedFittings, SedFittingFrz, SelectSedValves, SedHopperDrainValve, SedValveFrz, SelectSedAdapters, SedHopperDrainAdapter1, SedHopperDrainAdapter2, SedAdapterFrz, SelectSedFittings, SedHopperDrainElbow, SedFittingFrz)
SedHopperDrainScript := stack(SedHopperDrainPipeScript, SedHopperDrainFittingScript)
# Plate Settler Support Frame
B_SedPlateFrameCrossEst := 0.8 m  # ND_SedPlateFrame
N_SedFrameCrossPipe := max(round((L_Sed - L_SedPlate*cos(AN_SedPlate) + outerradius(ND_SedPlateFrame) - ConRadius(ND_SedPlateFrame))/B_SedPlateFrameCrossEst), 3)
B_SedPlateFrameCross := (L_Sed - L_SedPlate*cos(AN_SedPlate) + outerradius(ND_SedPlateFrame) - ConRadius(ND_SedPlateFrame))/(N_SedFrameCrossPipe - 1)
# Origin points:
SedFrameCentralTee1_Origin := [
    -ConRadius(ND_SedPlateFrame) - ShortTeeLength(ND_SedPlateFrame);
    W_Sed/2 - SocketDepth(ND_SedPlateFrame) - TeeLength(ND_SedPlateFrame)/2;
    Z_SedLamellaSupportLedge + ConRadius(ND_SedPlateFrame)
]
SedFrameCentralTee2_Origin := SedFrameCentralTee1_Origin + [-B_SedPlateFrameCross + 2*ShortTeeLength(ND_SedPlateFrame); 0 m; 0 m]
SedFrameCentralTee3_Origin := SedFrameCentralTee1_Origin + [-B_SedPlateFrameCross; 2*SocketDepth(ND_SedPlateFrame) + TeeLength(ND_SedPlateFrame); 0 m]
SedFrameCentralTee4_Origin := SedFrameCentralTee1_Origin + [
    -2*B_SedPlateFrameCross + 2*ShortTeeLength(ND_SedPlateFrame);
    2*SocketDepth(ND_SedPlateFrame) + TeeLength(ND_SedPlateFrame);
    0 m
]
SedFrameElbow1_Origin := [
    -ConRadius(ND_SedPlateFrame) - ElbowRadius(ND_SedPlateFrame);
    ConRadius(ND_SedPlateFrame);
    Z_SedLamellaSupportLedge + ConRadius(ND_SedPlateFrame)
]
SedFrameElbow2_Origin := SedFrameElbow1_Origin + [0 m; W_Sed - 2*ConRadius(ND_SedPlateFrame); 0 m]
SedFrameElbow3_Origin := SedFrameElbow1_Origin + [-(N_SedFrameCrossPipe - 1)*B_SedPlateFrameCross + 2*ElbowRadius(ND_SedPlateFrame); 0 m; 0 m]
SedFrameElbow4_Origin := SedFrameElbow2_Origin + [-(N_SedFrameCrossPipe - 1)*B_SedPlateFrameCross + 2*ElbowRadius(ND_SedPlateFrame); 0 m; 0 m]
SedFrameSideTee1_Origin := [
    -ConRadius(ND_SedPlateFrame) - B_SedPlateFrameCross;
    ConRadius(ND_SedPlateFrame) + ShortTeeLength(ND_SedPlateFrame);
    Z_SedLamellaSupportLedge + ConRadius(ND_SedPlateFrame)
]
SedFrameSideTee2_Origin := SedFrameSideTee1_Origin + [0 m; W_Sed - 2*ConRadius(ND_SedPlateFrame) - 2*ShortTeeLength(ND_SedPlateFrame); 0 m]
SedFrameInnerCrossPipe1_Origin := [
    -ConRadius(ND_SedPlateFrame) - B_SedPlateFrameCross;
    ConRadius(ND_SedPlateFrame) + ShortTeeLength(ND_SedPlateFrame);
    Z_SedLamellaSupportLedge + ConRadius(ND_SedPlateFrame)
]
L_SedFrameInnerCrossPipe1 := W_Sed/2 - ConRadius(ND_SedPlateFrame) - ShortTeeLength(ND_SedPlateFrame) - SocketDepth(ND_SedPlateFrame) - TeeLength(ND_SedPlateFrame)
SedFrameInnerCrossPipe2_Origin := SedFrameInnerCrossPipe1_Origin + [
    0 m;
    W_Sed/2 - ConRadius(ND_SedPlateFrame) - ShortTeeLength(ND_SedPlateFrame) - SocketDepth(ND_SedPlateFrame);
    0 m
]
SedFrameInnerCrossPipe3_Origin := SedFrameInnerCrossPipe2_Origin + [0 m; 2*SocketDepth(ND_SedPlateFrame) + TeeLength(ND_SedPlateFrame); 0 m]
SedFrameEndCrossPipe1_Origin := SedFrameCentralTee1_Origin + [ShortTeeLength(ND_SedPlateFrame); -TeeLength(ND_SedPlateFrame)/2; 0 m]
L_SedFrameEndCrossPipe1 := W_Sed/2 - ConRadius(ND_SedPlateFrame) - ElbowRadius(ND_SedPlateFrame) - SocketDepth(ND_SedPlateFrame) - TeeLength(ND_SedPlateFrame)
SedFrameEndCrossPipe2_Origin := SedFrameEndCrossPipe1_Origin + [0 m; TeeLength(ND_SedPlateFrame); 0 m]
L_SedFrameEndCrossPipe2 := W_Sed/2 - ConRadius(ND_SedPlateFrame) - ElbowRadius(ND_SedPlateFrame) + SocketDepth(ND_SedPlateFrame)
# Plate Frame Fittings
SedFrameCentralTee1 := TeeF(SedFrameCentralTee1_Origin, [90; 0; 0]*deg, ND_SedPlateFrame, PS_Default)
SedFrameCentralTee2 := TeeF(SedFrameCentralTee2_Origin, [-90; 0; 0]*deg, ND_SedPlateFrame, PS_Default)
ArrayPlateFrameCentralTees_1and2 := ArrayLast(1, floor(N_SedFrameCrossPipe/2), -2*B_SedPlateFrameCross)
SedFrameCentralTee3 := TeeF(SedFrameCentralTee3_Origin, [90; 0; 0]*deg, ND_SedPlateFrame, PS_Default)
SedFrameCentralTee4 := TeeF(SedFrameCentralTee4_Origin, [-90; 0; 0]*deg, ND_SedPlateFrame, PS_Default)
ArrayPlateFrameCentralTees_3and4 := ArrayLast(1, max(floor((N_SedFrameCrossPipe - 1)/2), 1), -2*B_SedPlateFrameCross)
SedPlateFrameCentralTeeScript := stack(SedPlateFrameFittingsLayer, SedFrameCentralTee1, ArrayPlateFrameCentralTees_1and2, SedFrameCentralTee2, ArrayPlateFrameCentralTees_1and2, SedFrameCentralTee3, ArrayPlateFrameCentralTees_3and4, SedFrameCentralTee4, ArrayPlateFrameCentralTees_3and4)
SedFrameElbow1 := ElbowF(SedFrameElbow1_Origin, [-90; 0; 0]*deg, ND_SedPlateFrame, PS_Default)
SedFrameElbow2 := ElbowF(SedFrameElbow2_Origin, [-90; 0; 180]*deg, ND_SedPlateFrame, PS_Default)
SedFrameElbow3 := ElbowF(SedFrameElbow3_Origin, [90; 0; 180]*deg, ND_SedPlateFrame, PS_Default)
SedFrameElbow4 := ElbowF(SedFrameElbow4_Origin, [90; 0; 0]*deg, ND_SedPlateFrame, PS_Default)
SedPlateFrameElbowScript := stack(SedFrameElbow1, SedFrameElbow2, SedFrameElbow3, SedFrameElbow4)
SedFrameSideTee1 := TeeF(SedFrameSideTee1_Origin, [0; 0; 0]*deg, ND_SedPlateFrame, PS_Default)
SedFrameSideTee2 := TeeF(SedFrameSideTee2_Origin, [180; 0; 0]*deg, ND_SedPlateFrame, PS_Default)
ArrayPlateFrameSideTee := ArrayLast(1, N_SedFrameCrossPipe - 2, -B_SedPlateFrameCross)
SedPlateFrameSideTeeScript := stack(SedFrameSideTee1, ArrayPlateFrameSideTee, SedFrameSideTee2, ArrayPlateFrameSideTee, SedPlateFrameFittingsFrz)
SedPlateFrameFittingScript := stack(SedPlateFrameCentralTeeScript, SedPlateFrameElbowScript, SedPlateFrameSideTeeScript)
# Plate Frame Pipes
SedFrameCentralPipe1 := PipeF(SedFrameCentralTee1_Origin, B_SedPlateFrameCross - 2*ShortTeeLength(ND_SedPlateFrame), [0; 0]*deg, ND_SedPlateFrame, PS_Default)
SedFrameCentralPipe2 := PipeF(SedFrameCentralTee3_Origin, B_SedPlateFrameCross - 2*ShortTeeLength(ND_SedPlateFrame), [0; 0]*deg, ND_SedPlateFrame, PS_Default)
SedFrameSidePipe1 := PipeF(SedFrameElbow1_Origin, B_SedPlateFrameCross - TeeLength(ND_SedPlateFrame)/2 - ElbowRadius(ND_SedPlateFrame), [0; 0]*deg, ND_SedPlateFrame, PS_Default)
SedFrameSidePipe2 := PipeF(SedFrameElbow2_Origin, B_SedPlateFrameCross - TeeLength(ND_SedPlateFrame)/2 - ElbowRadius(ND_SedPlateFrame), [0; 0]*deg, ND_SedPlateFrame, PS_Default)
ArraySedSidePipe1and2 := ArrayLast(1, 2, -B_SedPlateFrameCross*(N_SedFrameCrossPipe - 2) - TeeLength(ND_SedPlateFrame)/2 + ElbowRadius(ND_SedPlateFrame))
SedFrameSidePipe3 := PipeF(SedFrameElbow1_Origin + [-B_SedPlateFrameCross - TeeLength(ND_SedPlateFrame)/2 + ElbowRadius(ND_SedPlateFrame); 0 m; 0 m], B_SedPlateFrameCross - TeeLength(ND_SedPlateFrame), [0; 0]*deg, ND_SedPlateFrame, PS_Default)
SedFrameSidePipe4 := PipeF(SedFrameElbow2_Origin + [-B_SedPlateFrameCross - TeeLength(ND_SedPlateFrame)/2 + ElbowRadius(ND_SedPlateFrame); 0 m; 0 m], B_SedPlateFrameCross - TeeLength(ND_SedPlateFrame), [0; 0]*deg, ND_SedPlateFrame, PS_Default)
ArraySedSidePipe3and4 := ArrayLast(1, N_SedFrameCrossPipe - 3, -B_SedPlateFrameCross)
SedFrameInnerCrossPipe1 := PipeF(SedFrameInnerCrossPipe1_Origin, L_SedFrameInnerCrossPipe1, [-90; 0]*deg, ND_SedPlateFrame, PS_Default)
SedFrameInnerCrossPipe2 := PipeF(SedFrameInnerCrossPipe2_Origin, 2*SocketDepth(ND_SedPlateFrame), [-90; 0]*deg, ND_SedPlateFrame, PS_Default)
SedFrameInnerCrossPipe3 := PipeF(SedFrameInnerCrossPipe3_Origin, L_SedFrameInnerCrossPipe1, [-90; 0]*deg, ND_SedPlateFrame, PS_Default)
SedFrameEndCrossPipe1 := PipeF(SedFrameEndCrossPipe1_Origin, L_SedFrameEndCrossPipe1, [90; 0]*deg, ND_SedPlateFrame, PS_Default)
MirrorLast(p1, p2, Erase)
SedFrameEndCrossPipe2 := PipeF(SedFrameEndCrossPipe2_Origin, L_SedFrameEndCrossPipe2, [-90; 0]*deg, ND_SedPlateFrame, PS_Default)
ArrayEndCrossPipes :=
    ArrayLast(1, 2, -B_SedPlateFrameCross*(N_SedFrameCrossPipe - 1)) if mod(N_SedFrameCrossPipe, 2) == 0
    stack(ArrayLast(1, 2, -B_SedPlateFrameCross*(N_SedFrameCrossPipe - 1)), MirrorLast([-zc; W_Sed/2], [0 m; W_Sed/2], "y")) otherwise
N_SedFrameCrossPipes := □  # error: This placeholder is empty.
SedFramePipeScript1 := stack(SedPlateFramePipesLayer, SedFrameCentralPipe1, ArrayPlateFrameCentralTees_1and2, SedFrameCentralPipe2, ArrayPlateFrameCentralTees_3and4, SedFrameSidePipe1, ArraySedSidePipe1and2, SedFrameSidePipe2, ArraySedSidePipe1and2)
SedFramePipeScript2 := stack(SedFrameSidePipe3, ArraySedSidePipe3and4, SedFrameSidePipe4, ArraySedSidePipe3and4)
SedFramePipeScript3 := stack(SedFrameInnerCrossPipe1, ArrayPlateFrameSideTee, SedFrameInnerCrossPipe2, ArrayPlateFrameSideTee, SedFrameInnerCrossPipe3, ArrayPlateFrameSideTee)
SedFramePipeScript4 := stack(SedFrameEndCrossPipe1, SedFrameEndCrossPipe2, SedFrameEndCrossPipe1, ArrayEndCrossPipes, SedFrameEndCrossPipe2, ArrayEndCrossPipes, SedPlateFramePipesFrz)
SedFramePipeScript :=
    stack(SedFramePipeScript1, SedFramePipeScript2, SedFramePipeScript3, SedFramePipeScript4) if N_SedFrameCrossPipe > 3
    stack(SedFramePipeScript1, SedFramePipeScript3, SedFramePipeScript4) otherwise
SedPlateFrameScript := stack(SedPlateFrameFittingScript, SedFramePipeScript)
# Lamella
# Origins and Dimensions
Lamina_Origin := Plant_Origin + [-T_SedPlate*sin(AN_SedPlate); 0 m; Z_SedLamellaBottom]
SedModCap_Origin := Lamina_Origin + [
    -S_SedLaminaPipeToEdge*cos(AN_SedPlate) - N_SedModPlates*(S_SedPlate + T_SedPlate)*cos(AN_SedPlate)/tan(AN_SedPlate) + (T_SedPlate + CapHeight(ND_SedMod) - CapThickness(ND_SedMod))*sin(AN_SedPlate) - outerradius(ND_SedMod)*cos(AN_SedPlate);
    S_SedLaminaPipeToEdge + outerradius(ND_SedMod);
    S_SedLaminaPipeToEdge*sin(AN_SedPlate) + (N_SedModPlates*S_SedPlate + (N_SedModPlates + 1)*T_SedPlate + CapHeight(ND_SedMod) - CapThickness(ND_SedMod))*cos(AN_SedPlate) + outerradius(ND_SedMod)*sin(AN_SedPlate)
]
SedModMirrorLineX := (SedModCap_Origin[0] - (CapHeight(ND_SedMod) - CapThickness(ND_SedMod))*sin(AN_SedPlate) - (L_SedPlate - S_SedLaminaPipeToEdge - outerradius(ND_SedMod))*cos(AN_SedPlate))/2
SedModMirrorLineZ := ((Z_SedLamellaBottom + T_SedPlate*cos(AN_SedPlate) + (L_SedPlate - S_SedLaminaPipeToEdge - outerradius(ND_SedMod))*sin(AN_SedPlate)) + (SedModCap_Origin[2] - (CapHeight(ND_SedMod) - CapThickness(ND_SedMod))*cos(AN_SedPlate)))/2
# Lamella
MakeSedLamina := BoxF(Lamina_Origin, Lamina_Origin + [T_SedPlate; W_Sed; L_SedPlate], [0; -90 deg + AN_SedPlate; 0])
ArraySedLamina := ArrayLast(1, N_SedModPlates, -B_SedPlate/sin(AN_SedPlate))
SedLaminaScript := stack(SedLaminaLayer, MakeSedLamina, ArraySedLamina, SedLaminaFrz)
# Module Connector Caps
SedModCapRight := CapF(SedModCap_Origin, [0; 0; 0], ND_SedModulePipe)
SedModCapLeft := CapF(SedModCap_Origin - [
    B_SedPlate*(N_SedModPlates - 1) + T_SedPlate + 2*(CapHeight(ND_SedMod) - ConRadius(ND_SedMod) + outerradius(ND_SedMod));
    0 m;
    0 m
], [0; 180 deg; 0], ND_SedMod)
SedModCapScript := stack(SedModCapLayer, SedModCapRight, SedModCapLeft, SedModCapFrz)
# Module Connector Pipes and Spacers
SedModPipe := PipeF(SedModCap_Origin, B_SedPlate*(N_SedModPlates - 1) + T_SedPlate + 2*(CapHeight(ND_SedMod) - ConRadius(ND_SedMod) + outerradius(ND_SedMod)), [0; 0; 0], ND_SedMod, PS_Modules)
SedModSpacers := PipeF(SedModCap_Origin - [CapHeight(ND_SedMod) + T_SedPlate - CapThickness(ND_SedMod); 0; 0], B_SedPlate - T_SedPlate, [0; 0; 0], ND_SedModSpacer, PS_Modules)
ArraySedModSpacers := ArrayLast(1, N_SedModPlates - 1, -B_SedPlate)
SedModPipeScript := stack(SedModPipeLayer, SedModPipe, SedModPipeFrz, SedModSpacerLayer, SedModSpacers, ArraySedModSpacers, SedModSpacerFrz)
# Rotate and Array Connectors and Array Modules
ThawSedModPiping := ThawMultiple(["SedMod*Plu"])
RotateSedModPiping := Rotate_All([SedModCap_Origin[0]; SedModCap_Origin[2]; SedModCap_Origin[1]], 90 deg - AN_SedPlate)
MirrorSedModPipingUp := MirrorAll([SedModMirrorLineX; SedModMirrorLineZ], [SedModMirrorLineX; SedModMirrorLineZ] + [zc; zc/tan(AN_SedPlate)], "n")
TripleSedModPiping := array_all(3, 1, (W_SedPlate - 2*(S_SedLaminaPipeToEdge + outerradius(ND_SedModulePipe)))/2)
ThawSedModLamella := ThawMultiple(["SedModLamella"])
ArraySedMod := array_all(1, N_SedModules, -B_SedPlate*N_SedModPlates/sin(AN_SedPlate))
FreezeSedModComponents := FreezeMultiple(["SedMod*"])
SedModArrayScript := stack(ThawSedModPiping, view("f"), RotateSedModPiping, MirrorSedModPipingUp, view("t"), TripleSedModPiping, ThawSedModLamella, ArraySedMod, FreezeSedModComponents)
SedLamellaScript := stack(SedLaminaScript, SedModCapScript, SedModPipeScript, SedModArrayScript)
# Inlet Manifold Diffusers
SedManOrifice := CylinderF(SedManPipe3_Origin + [-L_SedManPipe3 + L_SedManFirstDiffuserGap + outerradius(ND_SedDiffuser); 0 m; 0 m], outerradius(ND_SedDiffuser), outerradius(ND_SedManifold) + zc, [0; 270]*deg)
ArraySedManOrifice := array_all(1, N_SedManifoldPorts, B_SedDiffuser)
SedDiffuser_Origin := SedManPipe3_Origin + [
    -L_SedManPipe3 + L_SedManFirstDiffuserGap + outerradius(ND_SedDiffuser);
    0 m;
    -innerdiameter(ND_SedManifold, PS_Default)/2
]
SedDiffOuterCircleSection := circle([SedDiffuser_Origin[0]; SedDiffuser_Origin[1]; SedDiffuser_Origin[2]], outerradius(ND_SedDiffuser))
SedDiffOuterRectangleSection := Pline3D([
    [
        SedDiffuser_Origin[0] + L_SedDiffuserInner/2 + T_SedDiffuserPvc;
        SedDiffuser_Origin[1] + W_SedDiffuserInner/2 + T_SedDiffuserPvc;
        SedDiffuser_Origin[2] - L_SedManifoldDiffuser
    ];
    [
        SedDiffuser_Origin[0] - L_SedDiffuserInner/2 - T_SedDiffuserPvc;
        SedDiffuser_Origin[1] + W_SedDiffuserInner/2 + T_SedDiffuserPvc;
        SedDiffuser_Origin[2] - L_SedManifoldDiffuser
    ];
    [
        SedDiffuser_Origin[0] - L_SedDiffuserInner/2 - T_SedDiffuserPvc;
        SedDiffuser_Origin[1] - W_SedDiffuserInner/2 - T_SedDiffuserPvc;
        SedDiffuser_Origin[2] - L_SedManifoldDiffuser
    ];
    [
        SedDiffuser_Origin[0] + L_SedDiffuserInner/2 + T_SedDiffuserPvc;
        SedDiffuser_Origin[1] - W_SedDiffuserInner/2 - T_SedDiffuserPvc;
        SedDiffuser_Origin[2] - L_SedManifoldDiffuser
    ];
    [
        SedDiffuser_Origin[0] + L_SedDiffuserInner/2 + T_SedDiffuserPvc;
        SedDiffuser_Origin[1] + W_SedDiffuserInner/2 + T_SedDiffuserPvc;
        SedDiffuser_Origin[2] - L_SedManifoldDiffuser
    ]
])
SedDiffZoomOuter := ZoomWindow([SedDiffuser_Origin[0] - L_SedDiffuserInner; SedDiffuser_Origin[1] + W_SedDiffuserInner], [SedDiffuser_Origin[0] + L_SedDiffuserInner; SedDiffuser_Origin[1] - W_SedDiffuserInner])
SedDiffOuterLoft := Loft([SedDiffuser_Origin[0] + outerradius(ND_SedDiffuser); SedDiffuser_Origin[1]; SedDiffuser_Origin[2]], [
    SedDiffuser_Origin[0] + L_SedDiffuserInner/2 + T_SedDiffuserWall;
    SedDiffuser_Origin[1] + W_SedDiffuserInner/2 + T_SedDiffuserWall;
    SedDiffuser_Origin[2] - L_SedManifoldDiffuser
])
SedDiffInnerCircleSection := circle([SedDiffuser_Origin[0]; SedDiffuser_Origin[1]; SedDiffuser_Origin[2]], innerdiameter(ND_SedDiffuser, PS_Default)/2)
SedDiffInnerRectangleSection := Pline3D([
    [
        SedDiffuser_Origin[0] + L_SedDiffuserInner/2;
        SedDiffuser_Origin[1] + W_SedDiffuserInner/2;
        SedDiffuser_Origin[2] - L_SedManifoldDiffuser
    ];
    [
        SedDiffuser_Origin[0] - L_SedDiffuserInner/2;
        SedDiffuser_Origin[1] + W_SedDiffuserInner/2;
        SedDiffuser_Origin[2] - L_SedManifoldDiffuser
    ];
    [
        SedDiffuser_Origin[0] - L_SedDiffuserInner/2;
        SedDiffuser_Origin[1] - W_SedDiffuserInner/2;
        SedDiffuser_Origin[2] - L_SedManifoldDiffuser
    ];
    [
        SedDiffuser_Origin[0] + L_SedDiffuserInner/2;
        SedDiffuser_Origin[1] - W_SedDiffuserInner/2;
        SedDiffuser_Origin[2] - L_SedManifoldDiffuser
    ];
    [
        SedDiffuser_Origin[0] + L_SedDiffuserInner/2;
        SedDiffuser_Origin[1] + W_SedDiffuserInner/2;
        SedDiffuser_Origin[2] - L_SedManifoldDiffuser
    ]
])
SedDiffZoomInner := ZoomWindow([SedDiffuser_Origin[0] - L_SedDiffuserInner; SedDiffuser_Origin[1] + W_SedDiffuserInner], [SedDiffuser_Origin[0] + L_SedDiffuserInner; SedDiffuser_Origin[1] - W_SedDiffuserInner])
SedDiffInnerLoft := Loft([
    SedDiffuser_Origin[0] + innerdiameter(ND_SedDiffuser, PS_Default)/2;
    SedDiffuser_Origin[1];
    SedDiffuser_Origin[2]
], [
    SedDiffuser_Origin[0] + L_SedDiffuserInner/2;
    SedDiffuser_Origin[1] + W_SedDiffuserInner/2;
    SedDiffuser_Origin[2] - L_SedManifoldDiffuser
])
SedDiffGroupInner := GroupAll("DeleteMe")
SedDiffSubtract := SubtractF(["SedManDiffuserPlu"], "DeleteMe")
SedDiffArray := Array_All(1, N_SedManifoldPorts, B_SedDiffuser)
SedDiffuserScript := stack(SedDiffLayer, SedDiffOuterCircleSection, SedDiffOuterRectangleSection, SedDiffZoomOuter, SedDiffOuterLoft, SedDiffuserFreeze, SedDiffInnerCircleSection, SedDiffInnerRectangleSection, SedDiffZoomInner, SedDiffInnerLoft, SedDiffGroupInner, SedDiffSubtract, SedDiffSelect, SedDiffArray, SedDiffuserFreeze)
# Sed Surface Skimmer
# Origins and Dimensions
H_SkimmerToSurface := 3 cm
SedSkimmerCap_Origin := Plant_Origin + [
    -L_Sed + SocketDepth(ND_SedSkimmer) + ElbowRadius(ND_SedSkimmer);
    W_Sed/2 + ConRadius(ND_SedLaunder) + S_Fitting + ConRadius(ND_SedSkimmer);
    ZW_Sed - H_SkimmerToSurface
]
SedSkimmerHorizPipe_Origin := [
    SedSkimmerCap_Origin[0] - ElbowRadius(ND_SedSkimmer);
    SedSkimmerCap_Origin[1];
    Plant_Origin[2] + Z_SedChannelBottom - T_ChannelWall - ConRadius(ND_SedSkimmer)
]
SedSkimmerElbow_Origin := SedSkimmerHorizPipe_Origin + [ElbowRadius(ND_SedSkimmer); 0 m; ElbowRadius(ND_SedSkimmer)]
SedSkimmerVertPipe_Origin := SedSkimmerCap_Origin
SedSkimmerCap := CapF(SedSkimmerCap_Origin, [0; -90]*deg, ND_SedSkimmer)
SedSkimmerElbow := ElbowF(SedSkimmerElbow_Origin, [0; 0; 270]*deg, ND_SedSkimmer, PS_Default)
SedSkimmerFittingsScript := stack(SelectSedFittings, SedSkimmerCap, SedSkimmerElbow, SedFittingFrz)
SedSkimmerVertPipe := PipeF(SedSkimmerVertPipe_Origin, SedSkimmerCap_Origin[2] - SedSkimmerElbow_Origin[2], [0; -90]*deg, ND_SedSkimmer, PS_Default)
SedSkimmerHorizPipe := PipeSUBF(SedSkimmerHorizPipe_Origin, T_PlantWall + SocketDepth(ND_SedSkimmer), [0; 0]*deg, ND_SedSkimmer, PS_Default, ["SedTankCon"])
SedSkimmerPipesScript := stack(SelectSedPipes, SedSkimmerVertPipe, SedSkimmerHorizPipe, SedPipeFrz)
SubtractFromSedJetReverser := SubtractF(["SedJetReverserPlu"], "DeleteMe")
SedSkimmerPlateCut := BoxF(SedSkimmerVertPipe_Origin + [outerradius(ND_SedSkimmer); outerradius(ND_SedSkimmer); 0 m], SedSkimmerVertPipe_Origin + [
    -ElbowRadius(ND_SedSkimmer) - SocketDepth(ND_SedSkimmer);
    -outerradius(ND_SedSkimmer);
    -(SedSkimmerCap_Origin[2] - SedSkimmerElbow_Origin[2])
], [0; 0; 0]*deg)
SubtractFromSedLamella := SubtractF(["SedModLamella"], "DeleteMe")
SedSkimmerScript := stack(SedSkimmerFittingsScript, SedSkimmerPipesScript, SedSkimmerPlateCut, GroupDelete, SubtractFromSedLamella)
AC_SedTank := stack(SedConScript, SedSludgeDrainScript, SedManifoldScript, SedLaunderScript, SedHopperDrainScript, SedPlateFrameScript, SedLamellaScript, SedDiffuserScript, SedSkimmerScript)
