Q_Plant := 10*L/s
# [reference: ExpertInputs.xmcd]
# [reference: MathFunctions.xmcd]
# [reference: PipeDatabase.xmcd]
# [reference: MaterialsDatabase.xmcd]
# [reference: FluidsFunctions.xmcd]
# [reference: SedTankFunctions.xmcd]
# [reference: CdcFunctions.xmcd]
# [reference: LfomFunctions.xmcd]
# [reference: SedimentationTank_abh35.xmcd]
# [reference: Flocculator.xmcd]
# [reference: LFOM.xmcd]
# [reference: EntranceTank.xmcd]
# [reference: StackedRapidSandFilter.xmcd]
# [reference: LinearCdc.xmcd]
# [reference: ChemStorageTanks.xmcd]
# [reference: MtoATranslators.xmcd]
# [reference: MtoATranslatorsWrapped.xmcd]
# [reference: ChannelF.xmcd]
# [reference: PlumbingF.xmcd]
# [reference: TankF.xmcd]
# [reference: StairsF.xmcd]
# [reference: DrainChannelF.xmcd]
# [reference: FlocculatorAC.xmcd]
L_SedManifoldOffset := innerdiameter(ND_SedJetReverser, PS_Default)/2 - W_SedDiffuserInner/2 = 0.0391795 m
# Sedimentation Tank Drawing
S_SedLaminaPipeToEdge := 5 cm
ND_SedMod := ND_SedModulePipe
ND_SedModSpacer := ND_SedModulePipeSpacer
# Layers
SedTankLayer := layer_new("SedTankCon", grey)
SedValveLayer := layer_new("SedValvePlu", blue3)
SelectSedCon := SelectLayer("SedTankCon")
SelectSedValves := SelectLayer("SedValvePlu")
SedConFrz := FreezeLayer("SedTankCon")
SedValveFrz := FreezeLayer("SedValvePlu")
SedPipeLayer := layer_new("SedPipePlu", blue)
SedAdapterLayer := layer_new("SedAdapterPlu", blue2)
SelectSedPipes := SelectLayer("SedPipePlu")
SelectSedAdapters := SelectLayer("SedAdapterPlu")
SedPipeFrz := FreezeLayer("SedPipePlu")
SedAdapterFrz := FreezeLayer("SedAdapterPlu")
SedFittingLayer := layer_new("SedFittingPlu", green)
SedJetReverser_Layer := layer_new("SedJetReverserPlu", blue)
SelectSedFittings := SelectLayer("SedFittingPlu")
SedJetReverserFrz := FreezeLayer("SedJetReverserPlu")
SedFittingFrz := FreezeLayer("SedFittingPlu")
SedInletRemovables := layer_new("SedInletRemovables", red)
SedFerncoLayer := layer_new("SedFerncoPlu", purple)
SedInletRemovablesSelect := SelectLayer("SedInletRemovables")
SelectSedFerncos := SelectLayer("SedFerncoPlu")
SedFerncoFrz := FreezeLayer("SedFerncoPlu")
SedInletRemovablesFrz := FreezeLayer("SedInletRemovables")
SedLaunderRemovableLayer := layer_new("SedLaunderRemovablePlu", red)
SelectLaunderSedRemovables := SelectLayer("SedLaunderRemovablePlu")
SedLaunderRemovableFrz := FreezeLayer("SedLaunderRemovablePlu")
DrainPipeBoxLayer := layer_new("DrainPipeBox", grey)
SedModPipeLayer := layer_new("SedModPipePlu", blue3)
DrainPipeBoxFrz := FreezeLayer("DrainPipeBox")
SedModPipeFrz := FreezeLayer("SedModPipePlu")
SedModSpacerLayer := layer_new("SedModSpacerPlu", blue)
SedModSpacerFrz := FreezeLayer("SedModSpacerPlu")
SedLaminaLayer := layer_new("SedModLamella", purple)
SedLaminaFrz := FreezeLayer("SedModLamella")
SedModCapLayer := layer_new("SedModCapPlu", red)
SedModCapFrz := FreezeLayer("SedModCapPlu")
SedPlateFrameFittingsLayer := layer_new("SedPlateFrameFittingsPlu", green)
SedPlateFrameFittingsFrz := FreezeLayer("SedPlateFrameFittingsPlu")
SedPlateFramePipesLayer := layer_new("SedPlateFramePipesPlu", blue)
SedPlateFramePipesFrz := FreezeLayer("SedPlateFramePipesPlu")
Mod := 0
# Sedimentation Tank Concrete (excluding lamella support ledge)
# Side Slopes and Launder Support Ledge
# Draw as a channel so that it can be arrayed. All side walls at end.
DrawSedTank := ChannelDrawingPlus(Plant_Origin + [-L_Sed; W_Sed + T_PlantWall; -outerdiameter(ND_SedJetReverser)], [W_Sed + 2*T_SedWallDivider; L_Sed; Z_Sed], T_PlantWall, T_SedTankBottomSlab, [270; 0; 0]*deg)
SedSlopePolyline := Pline3D([
    [Plant_Origin[0]; Plant_Origin[1] + W_Sed; Plant_Origin[2] - outerdiameter(ND_SedJetReverser)] + [0 m; 0 m; 0 m];
    [Plant_Origin[0]; Plant_Origin[1] + W_Sed; Plant_Origin[2] - outerdiameter(ND_SedJetReverser)] + [0 m; 0 m; outerradius(ND_SedJetReverser) + H_SedSideSlopes];
    [Plant_Origin[0]; Plant_Origin[1] + W_Sed; Plant_Origin[2] - outerdiameter(ND_SedJetReverser)] + [0 m; -W_Sed/2 + innerdiameter(ND_SedJetReverser/2, PS_Default); outerradius(ND_SedJetReverser)];
    [Plant_Origin[0]; Plant_Origin[1] + W_Sed; Plant_Origin[2] - outerdiameter(ND_SedJetReverser)] + [0 m; -W_Sed/2 - innerdiameter(ND_SedJetReverser/2, PS_Default); outerradius(ND_SedJetReverser)];
    [Plant_Origin[0]; Plant_Origin[1] + W_Sed; Plant_Origin[2] - outerdiameter(ND_SedJetReverser)] + [0 m; -W_Sed; outerradius(ND_SedJetReverser) + H_SedSideSlopes];
    [Plant_Origin[0]; Plant_Origin[1] + W_Sed; Plant_Origin[2] - outerdiameter(ND_SedJetReverser)] + [0 m; -W_Sed; 0 m];
    [Plant_Origin[0]; Plant_Origin[1] + W_Sed; Plant_Origin[2] - outerdiameter(ND_SedJetReverser)] + [0 m; 0 m; 0 m]
])
ExtrudeSedSlopes := ExtrudeLast(-L_SedUpflow)
SedLaunderLedge := BoxF([0; W_Sed - 1/2*W_Sed + ConRadius(ND_SedLaunder); Z_SedLaunder - ConRadius(ND_SedLaunder)] + Plant_Origin, [
    -2*SocketDepth(ND_SedLaunder);
    W_Sed - 1/2*W_Sed - ConRadius(ND_SedLaunder);
    Z_SedLaunder - ConRadius(ND_SedLaunder) - T_ConcreteMin
] + Plant_Origin, [0; 0; 0]*deg)
DrainPipeBox := BoxF([
    Plant_Origin[0] - L_Sed + W_SedInletChannelPreWeir + T_SedWeir;
    Plant_Origin[1] + 2*S_Fitting + 2*ConRadius(ND_SedInletChannelDrain);
    Plant_Origin[2] + Z_SedChannelBottom
], [Plant_Origin[0] - L_Sed; Plant_Origin[1]; Plant_Origin[2]], [0; 0; 0]*deg)
SedFlocWeirBox := BoxF([Plant_Origin[0] - L_SedUpflow - T_SedWeir; Plant_Origin[1] - zc; Plant_Origin[2] + Z_SedFlocWeir], [
    Plant_Origin[0] - L_SedUpflow;
    Plant_Origin[1] + W_Sed + zc;
    Plant_Origin[2] - outerdiameter(ND_SedJetReverser)
], [0; 0; 0]*deg)
SedSlopeLedgeScript := stack(SedTankLayer, DrawSedTank, SedSlopePolyline, ExtrudeSedSlopes, SedLaunderLedge, SedFlocWeirBox)
# Lamella support ledges
SedLamellaSupportLedge1 := BoxF(Plant_Origin + [0 m; 0 m; Z_SedLamellaSupportLedge - T_ConcreteMin], Plant_Origin + [-L_SedUpflow; T_ConcreteMin; Z_SedLamellaSupportLedge], [0; 0; 0]*deg)
SedLamellaSupportLedge2 := BoxF(Plant_Origin + [0 m; W_Sed; Z_SedLamellaSupportLedge - T_ConcreteMin], Plant_Origin + [-L_SedUpflow; W_Sed - T_ConcreteMin; Z_SedLamellaSupportLedge], [0; 0; 0]*deg)
SedLamellaLedgeScript := stack(SedLamellaSupportLedge1, SedLamellaSupportLedge2)
# Inlet and Exit Channels
ChannelVertBox := BoxF([-L_Sed + W_SedInletChannel + W_SedExitChannel + T_SedWeir; W_Sed + T_PlantWall; Z_SedChannelBottom] + Plant_Origin, [-L_Sed + W_SedInletChannel + W_SedExitChannel + T_SedWeir + T_ChannelWall; -T_PlantWall; Z_Sed] + Plant_Origin, [0; 0; 0]*deg)
ChannelHorizBox := BoxF([-L_Sed; W_Sed + T_PlantWall; Z_SedChannelBottom] + Plant_Origin, [
    -L_Sed + W_SedExitChannel + T_SedWeir + W_SedInletChannel + T_ChannelWall;
    -T_PlantWall;
    Z_SedChannelBottom - T_ChannelWall
] + Plant_Origin, [0; 0; 0]*deg)
SedChannelScript := stack(ChannelVertBox, ChannelHorizBox)
# Floc Hopper Front and Back Slopes
SedHopperFrontBackPline := Pline3D([
    [Plant_Origin[0] - L_Sed; Plant_Origin[1]; Plant_Origin[2] - outerdiameter(ND_SedJetReverser)];
    [
        Plant_Origin[0] - L_Sed + L_SedHopper;
        Plant_Origin[1];
        Plant_Origin[2] - outerdiameter(ND_SedJetReverser)
    ];
    [
        Plant_Origin[0] - L_Sed + L_SedHopper;
        Plant_Origin[1];
        Plant_Origin[2] + Z_SedHopperBottom + H_SedHopperFrontSlope
    ];
    [Plant_Origin[0] + X_SedHopperBottom; Plant_Origin[1]; Plant_Origin[2] + Z_SedHopperBottom];
    [
        Plant_Origin[0] - L_Sed;
        Plant_Origin[1];
        Plant_Origin[2] + Z_SedHopperBottom + H_SedHopperBackSlope
    ];
    [Plant_Origin[0] - L_Sed; Plant_Origin[1]; Plant_Origin[2] - outerdiameter(ND_SedJetReverser)]
])
ExtrudeSedHopperFrontBack := ExtrudeLast(-W_Sed)
SedHopperSidePline := Pline3D([
    [Plant_Origin[0] - L_SedUpflow - T_SedWeir; Plant_Origin[1]; Plant_Origin[2]] + [0 m; 0 m; -outerdiameter(ND_SedJetReverser)];
    [Plant_Origin[0] - L_SedUpflow - T_SedWeir; Plant_Origin[1]; Plant_Origin[2]] + [0 m; W_Sed; -outerdiameter(ND_SedJetReverser)];
    [Plant_Origin[0] - L_SedUpflow - T_SedWeir; Plant_Origin[1]; Plant_Origin[2]] + [0 m; W_Sed; Z_SedHopperSideSlope];
    [Plant_Origin[0] - L_SedUpflow - T_SedWeir; Plant_Origin[1]; Plant_Origin[2]] + [
        0 m;
        3*S_Fitting + 2*ConRadius(ND_SedInletChannelDrain) + outerdiameter(ND_SedHopperDrain);
        Z_SedHopperBottom
    ];
    [Plant_Origin[0] - L_SedUpflow - T_SedWeir; Plant_Origin[1]; Plant_Origin[2]] + [0 m; 3*S_Fitting + 2*ConRadius(ND_SedInletChannelDrain); Z_SedHopperBottom];
    [Plant_Origin[0] - L_SedUpflow - T_SedWeir; Plant_Origin[1]; Plant_Origin[2]] + [0 m; 0 m; Z_SedHopperSideSlope];
    [Plant_Origin[0] - L_SedUpflow - T_SedWeir; Plant_Origin[1]; Plant_Origin[2]] + [0 m; 0 m; -outerdiameter(ND_SedJetReverser)]
])
ExtrudeSedHopperSides := ExtrudeLast(-L_SedHopper)
SedHopperScript := stack(SedHopperFrontBackPline, ExtrudeSedHopperFrontBack, SedHopperSidePline, ExtrudeSedHopperSides)
SedConScript := stack(SedSlopeLedgeScript, SedChannelScript, SedLamellaLedgeScript, SedHopperScript, SedConFrz, DrainPipeBoxLayer, DrainPipeBox, DrainPipeBoxFrz)
# Jet Reverser and Sludge Drain
# Origins and Dimensions
SedJetReverser_Origin := Plant_Origin + [0 m; W_Sed/2; -outerradius(ND_SedJetReverser)]
# the ten centimeters to ensure you can wrap your hand between two valves
L_SedJetReverserPipe := L_Sed + T_PlantWall + 2*MaleAdapterLength(ND_SedHopperDrain) + ValveLength(ND_SedHopperDrain) + SocketDepth(ND_SedHopperDrain) + ElbowRadius(ND_SedHopperDrain) + ConRadius(ND_SedHopperDrain) = 5.88287 m
SedSludgeDrainAdapter1_Origin := SedJetReverser_Origin + [-L_SedJetReverserPipe; 0 m; 0 m]
SedSludgeDrainAdapter2_Origin := SedSludgeDrainAdapter1_Origin + [
    -2*MaleAdapterLength(ND_SedJetReverser) - ValveLength(ND_SedJetReverser) + 2*SocketDepth(ND_SedJetReverser) + 2*ValveSocket(ND_SedJetReverser);
    0 m;
    0 m
]
SedSludgeDrainValve_Origin := SedSludgeDrainAdapter1_Origin + [
    -MaleAdapterLength(ND_SedJetReverser) + SocketDepth(ND_SedJetReverser) + ValveSocket(ND_SedJetReverser);
    0 m;
    0 m
]
SedSludgeDrainElbow_Origin := SedSludgeDrainAdapter2_Origin + [-2*SocketDepth(ND_SedJetReverser); 0 m; 0 m]
# Jet Reverser Pipe
SedJetReverser := PipeSUBF(SedJetReverser_Origin, L_SedJetReverserPipe, [0; 0]*deg, ND_SedJetReverser, PS_Default, ["SedTankCon"])
SedJetReverserCut := BoxF(SedJetReverser_Origin + [0 m; -outerradius(ND_SedJetReverser); 0 m], SedJetReverser_Origin + [-L_SedUpflow; outerradius(ND_SedJetReverser); outerradius(ND_SedJetReverser)], [0; 0; 0]*deg)
SubtractFromSedJetReverser := SubtractF(["SedJetReverserPlu"], "DeleteMe")
SedJetReverserScript := stack(SedJetReverser_Layer, SedJetReverser, SedJetReverserFrz, SedJetReverserCut, GroupDelete, SubtractFromSedJetReverser)
# Sludge Drain Fittings
SedSludgeDrainAdapter1 := MaleAdapterF(SedSludgeDrainAdapter1_Origin, [0; 0]*deg, ND_SedJetReverser, PS_Default)
SedSludgeDrainAdapter2 := MaleAdapterF(SedSludgeDrainAdapter2_Origin, [180; 0]*deg, ND_SedJetReverser, PS_Default)
SedSludgeDrainValve := insertdwg("https://confluence.cornell.edu/download/attachments/173604905/Sed-Scaled-Gate-Valve-Threaded.dwg", SedSludgeDrainValve_Origin, 2*outerradius(ND_SedJetReverser)/(1.16 m), 2*outerradius(ND_SedJetReverser)/(1.16 m), 0 deg)
SedSludgeDrainElbow := ElbowF(SedSludgeDrainElbow_Origin, [90; 0; 45]*deg, ND_SedJetReverser, PS_Default)
SedSludgeDrainNipple := PipeF(SedSludgeDrainAdapter2_Origin, 2*SocketDepth(ND_SedJetReverser), [0; 0]*deg, ND_SedJetReverser, PS_Default)
SedSludgeDrainFittingScript := stack(SedAdapterLayer, SedSludgeDrainAdapter1, SedSludgeDrainAdapter2, SedAdapterFrz, SedValveLayer, SedSludgeDrainValve, SedValveFrz, SedFittingLayer, SedSludgeDrainElbow, SedFittingFrz, SedPipeLayer, SedSludgeDrainNipple, SedPipeFrz)
SedSludgeDrainScript := stack(SedJetReverserScript, SedSludgeDrainFittingScript)
# Inlet Manifold
# Origins and Dimensions
SedManHorizPipe1_Origin := [
    Plant_Origin[0] - L_SedUpflow + L_SedManConnectionStub - 1 mm;
    Plant_Origin[1] + W_Sed/2 + L_SedManifoldOffset;
    Z_SedManifoldPipe
]  # Subtracted 1mm so that there would be a visible space between the two horizontal pipes to show that they are separate
L_SedManHorizPipe1 := L_SedHopper + T_SedWeir + L_SedManConnectionStub - S_Fitting - ConRadius(ND_SedManifold) - ElbowRadius(ND_SedManifold) - 1 mm
SedManHorizPipe2_Origin := [
    Plant_Origin[0] - CapThickness(ND_SedManifold) - L_SedManifoldPipeFromTankEnd;
    Plant_Origin[1] + W_Sed/2 + L_SedManifoldOffset;
    Z_SedManifoldPipe
]
L_SedManHorizPipe2 := L_SedUpflow - L_SedManConnectionStub - L_SedManifoldPipeFromTankEnd - CapThickness(ND_SedManifold)
SedManElbow_Origin := SedManHorizPipe1_Origin + [-L_SedManHorizPipe1; 0 m; 0 m]
SedManCap_Origin := SedManHorizPipe2_Origin
# Manifold Pipes
SedManHorizPipe1 := PipeSUBF(SedManHorizPipe1_Origin, L_SedManHorizPipe1, [0; 0]*deg, ND_SedManifold, PS_Default, ["SedTankCon"])
SedManHorizPipe2 := PipeF(SedManHorizPipe2_Origin, L_SedManHorizPipe2, [0; 0]*deg, ND_SedManifold, PS_Default)
SedManPipeScript := stack(SelectSedPipes, SedManHorizPipe1, SedManHorizPipe2, SedPipeFrz)
# Manifold Fittings
SedManElbow := ElbowSUBF(SedManElbow_Origin, [90; 0; 270]*deg, ND_SedManifold, PS_Default, ["SedTankCon"])
SedManCap := CapF(SedManCap_Origin, [0; 0; 0]*deg, ND_SedManifold)
SedManFernco := FerncoCouplingF(SedManHorizPipe1_Origin + [L_SedManFirstDiffuserGap + 1 mm; 0 m; 0 m], [0; 0; 0]*deg, ND_SedManifold, L_SedManConnectionStub + L_SedManFirstDiffuserGap)
SedManFittingScript := stack(SelectSedFittings, SedManCap, SedManElbow, SedFittingFrz, SedFerncoLayer, SedManFernco, SedFerncoFrz)
# Manifold Orifices
SedManOrifice := CylinderF(SedManHorizPipe2_Origin + [-L_SedManHorizPipe2 + L_SedManFirstDiffuserGap + outerradius(ND_SedDiffuser); 0 m; 0 m], outerradius(ND_SedDiffuser), outerradius(ND_SedManifold) + zc, [0; 270]*deg)
ArraySedManOrifice := array_all(1, N_SedManifoldPorts, B_SedDiffuser)
# Air Vent Holes
SedManAirVent := CylinderF([
    Plant_Origin[0] - (N_SedAirVents*B_AirVentHoles + L_SedManifoldPipeFromTankEnd + L_SedDiffusersToEnd + CapThickness(ND_SedManifold));
    SedManPipe_Origin[1];
    SedManPipe_Origin[2] + outerradius(ND_SedManifold) + ND_SedManifold/4
], D_AirVentHoles/2, ND_SedManifold/2, [0; 270]*deg)
ArraySedManAirVent := array_all(1, N_SedAirVents, B_AirVentHoles)
SubtractFromSedPipes := SubtractF(["SedPipePlu"], "DeleteMe")
SubtractFromSedFittings := SubtractF(["SedFittingPlu"], "DeleteMe")
SedManOrificeScript := stack(SedManOrifice, ArraySedManOrifice, GroupDelete, SubtractFromSedPipes, SedManOrifice, ArraySedManOrifice, GroupDelete, SubtractFromSedFittings)
SedManifoldScript := stack(SedManPipeScript, SedManFittingScript, SedManOrificeScript)
# Exit Launder
# Origins and Dimensions
SedLaunderPipe_Origin :=
    if T_ChannelWall > CouplingLength(ND_SedLaunder)
        [
            Plant_Origin[0] - L_SedUpflow + max(0 m, 2*CouplingLength(ND_SedLaunder) - T_ChannelWall) - SocketDepth(ND_SedLaunder);
            Plant_Origin[1] + 1/2*W_Sed;
            Plant_Origin[2] + Z_SedLaunder
        ]
    otherwise
        [
            Plant_Origin[0] - L_SedUpflow - T_ChannelWall + CouplingLength(ND_SedLaunder) - SocketDepth(ND_SedLaunder);
            Plant_Origin[1] + W_Sed/2;
            Plant_Origin[2] + Z_SedLaunder
        ]
SedLaunderCap_Origin := SedLaunderPipe_Origin + [L_SedLaunder; 0 m; 0 m]
SedLaunderCoupling1_Origin := [
    Plant_Origin[0] - L_Sed + W_SedExitChannel + W_SedInletChannel + T_SedWeir + SocketDepth(ND_SedLaunder);
    Plant_Origin[1] + W_Sed/2;
    Plant_Origin[2] + Z_SedLaunder
]
SedLaunderCoupling2_Origin := [
    Plant_Origin[0] - L_SedUpflow + max(0 m, 2*CouplingLength(ND_SedLaunder) - T_ChannelWall) - SocketDepth(ND_SedLaunder);
    Plant_Origin[1] + W_Sed/2;
    Plant_Origin[2] + Z_SedLaunder
]
SedLaunderNipple_Origin := SedLaunderCoupling1_Origin + [CouplingLength(ND_SedLaunder) - 2*SocketDepth(ND_SedLaunder); 0 m; 0 m]
SedLaunderPlugCap_Origin := [
    Plant_Origin[0] - L_SedUpflow - T_ChannelWall - CapHeight(ND_SedLaunder) + CapThickness(ND_SedLaunder);
    Plant_Origin[1] + W_Sed/2;
    Plant_Origin[2] + Z_SedLaunder
]
# Launder Fittings
SedLaunderEndCap := CapF(SedLaunderCap_Origin, [0; 0]*deg, ND_SedLaunder)
SedLaunderPlugCap := CapF(SedLaunderPlugCap_Origin, [180; 0]*deg, ND_SedLaunder)
SedLaunderCoupling1 := CouplingSUBF(SedLaunderCoupling1_Origin, [0; 180]*deg, ND_SedLaunder, PS_Default, ["SedTankCon"])
SedLaunderCoupling2 := CouplingSUBF(SedLaunderCoupling2_Origin, [0; 0]*deg, ND_SedLaunder, PS_Default, ["SedTankCon"])
SedLaunderFittingScript :=
    stack(SelectSedFittings, SedLaunderEndCap, SedLaunderCoupling1, SedFittingFrz, SedLaunderRemovableLayer, SedLaunderPlugCap, SedLaunderRemovableFrz) if CouplingLength(ND_SedLaunder) ≥ T_ChannelWall
    stack(SelectSedFittings, SedLaunderEndCap, SedLaunderCoupling1, SedLaunderCoupling2, SedFittingFrz, SedLaunderRemovableLayer, SedLaunderPlugCap, SedLaunderRemovableFrz) otherwise
# Launder Pipes
SedLaunderPipe := PipeF(SedLaunderPipe_Origin, L_SedLaunder, [0; 180]*deg, ND_SedLaunder, PS_Default)
SedLaunderPlugNipple := PipeF(SedLaunderPlugCap_Origin, CapHeight(ND_SedLaunder) - CapThickness(ND_SedLaunder) + L_SedLaunderCapExcess, [180; 0]*deg, ND_SedLaunder, PS_Default)
SedLaunderNipple := PipeSUBF(SedLaunderNipple_Origin, T_ChannelWall - 2*CouplingLength(ND_SedLaunder) + 2*SocketDepth(ND_SedLaunder), [0; 180]*deg, ND_SedLaunder, PS_Default, ["SedTankCon"])
SedLaunderPipeScript :=
    stack(SelectSedPipes, SedLaunderPipe, SedPipeFrz, SelectLaunderSedRemovables, SedLaunderPlugNipple, SedLaunderRemovableFrz) if CouplingLength(ND_SedLaunder) ≥ T_ChannelWall
    stack(SelectSedPipes, SedLaunderPipe, SedLaunderNipple, SedPipeFrz, SelectLaunderSedRemovables, SedLaunderPlugNipple, SedLaunderRemovableFrz) otherwise
# Launder Orifices
SedLaunderOrifice := CylinderF([SocketDepth(ND_SedLaunder) + 1/2*B_SedLaunderOrifices; 0 m; 0 m] + SedLaunderPipe_Origin, D_SedLaunderOrifice/2, outerradius(ND_SedLaunder) + zc, [0; 90]*deg)
ArraySedLaunderOrifices := array_all(1, N_SedLaunderOrifices, B_SedLaunderOrifices)
SedLaunderOrificeScript := stack(SedLaunderOrifice, ArraySedLaunderOrifices, GroupDelete, SubtractFromSedPipes, SedLaunderOrifice, ArraySedLaunderOrifices, GroupDelete, SubtractFromSedFittings)
SedLaunderScript := stack(SedLaunderFittingScript, SedLaunderPipeScript, SedLaunderOrificeScript)
# Floc Hopper Drain
# Origins
SedHopperDrainAdapter1_Origin := Plant_Origin + [
    -L_Sed - T_PlantWall - SocketDepth(ND_SedHopperDrain);
    3*S_Fitting + 2*ConRadius(ND_SedInletChannelDrain) + outerradius(ND_SedHopperDrain);
    Z_SedHopperBottom + outerradius(ND_SedHopperDrain)
]
SedHopperDrainValve_Origin := SedHopperDrainAdapter1_Origin + [
    -MaleAdapterLength(ND_SedHopperDrain) + ValveSocket(ND_SedHopperDrain) + SocketDepth(ND_SedHopperDrain);
    0 m;
    0 m
]
SedHopperDrainAdapter2_Origin := SedHopperDrainValve_Origin + [
    ValveSocket(ND_SedHopperDrain) - ValveLength(ND_SedHopperDrain) + SocketDepth(ND_SedHopperDrain) - MaleAdapterLength(ND_SedHopperDrain);
    0 m;
    0 m
]
SedHopperDrainElbow_Origin := SedHopperDrainAdapter2_Origin + [-2*SocketDepth(ND_SedHopperDrain); 0 m; 0 m]
SedHopperDrainPipe_Origin := [
    Plant_Origin[0] - L_SedUpflow - T_SedWeir - L_SedHopper/2;
    SedHopperDrainAdapter1_Origin[1];
    SedHopperDrainAdapter1_Origin[2]
]
# Hopper Drain Pipes
SedHopperDrainNipple1 := PipeF(SedHopperDrainAdapter1_Origin + [2*SocketDepth(ND_SedHopperDrain); 0; 0], 2*SocketDepth(ND_SedHopperDrain), [0; 0]*deg, ND_SedHopperDrain, PS_Default)
SedHopperDrainNipple2 := PipeF(SedHopperDrainAdapter2_Origin, 2*SocketDepth(ND_SedHopperDrain), [0; 0]*deg, ND_SedHopperDrain, PS_Default)
L_SedHopperDrainPipe := L_SedHopper/2 + T_PlantWall + SocketDepth(ND_SedHopperDrain)
SedHopperDrainPipe := PipeSUBF(SedHopperDrainPipe_Origin, L_SedHopperDrainPipe, [0; 0]*deg, ND_SedHopperDrain, PS_Default, ["SedTankCon"])
SedHopperDrainPipeWedge := WedgeF([0; outerradius(ND_SedHopperDrain); outerradius(ND_SedHopperDrain)] + SedHopperDrainPipe_Origin, [
    -2*outerradius(ND_SedHopperDrain)/tan(AN_SedHopperSlope);
    -outerradius(ND_SedHopperDrain);
    -outerradius(ND_SedHopperDrain)
] + SedHopperDrainPipe_Origin, [0; 0; 0])
SubtractSedHopperDrainPipeWedge := SubtractF(["SedPipePlu"], "DeleteMe")
SedHopperDrainPipeScript := stack(SelectSedPipes, SedHopperDrainNipple1, SedHopperDrainNipple2, SedHopperDrainPipe, SedPipeFrz, SedHopperDrainPipeWedge, GroupDelete, SubtractSedHopperDrainPipeWedge)
# Hopper Drain Fittings
SedHopperDrainElbow := ElbowF(SedHopperDrainElbow_Origin, [90; 0; 45]*deg, ND_SedHopperDrain, PS_Default)
SedHopperDrainAdapter1 := MaleAdapterF(SedHopperDrainAdapter1_Origin, [0; 0]*deg, ND_SedHopperDrain, PS_Default)
SedHopperDrainAdapter2 := MaleAdapterF(SedHopperDrainAdapter2_Origin, [180; 0]*deg, ND_SedHopperDrain, PS_Default)
SedHopperDrainValve := insertdwg("https://confluence.cornell.edu/download/attachments/173604905/Sed-Scaled-Gate-Valve-Threaded.dwg", SedHopperDrainValve_Origin, 2*outerradius(ND_SedHopperDrain)/(1.16 m), 2*outerradius(ND_SedHopperDrain)/(1.16 m), 0 deg)
SedHopperDrainFittingScript := stack(SelectSedFittings, SedFittingFrz, SelectSedValves, SedHopperDrainValve, SedValveFrz, SelectSedAdapters, SedHopperDrainAdapter1, SedHopperDrainAdapter2, SedAdapterFrz, SelectSedFittings, SedHopperDrainElbow, SedFittingFrz)
SedHopperDrainScript := stack(SedHopperDrainPipeScript, SedHopperDrainFittingScript)
# Lamella
# Origins and Dimensions
Lamina_Origin := Plant_Origin + [-T_SedPlate*sin(AN_SedPlate); 0 m; Z_SedLamellaBottom]
SedModCap_Origin := Lamina_Origin + [
    -S_SedLaminaPipeToEdge*cos(AN_SedPlate) - N_SedModPlates*(S_SedPlate + T_SedPlate)*cos(AN_SedPlate)/tan(AN_SedPlate) + (T_SedPlate + CapHeight(ND_SedMod) - CapThickness(ND_SedMod))*sin(AN_SedPlate) - outerradius(ND_SedMod)*cos(AN_SedPlate);
    S_SedLaminaPipeToEdge + outerradius(ND_SedMod);
    S_SedLaminaPipeToEdge*sin(AN_SedPlate) + (N_SedModPlates*S_SedPlate + (N_SedModPlates + 1)*T_SedPlate + CapHeight(ND_SedMod) - CapThickness(ND_SedMod))*cos(AN_SedPlate) + outerradius(ND_SedMod)*sin(AN_SedPlate)
]
SedModMirrorLineX := (SedModCap_Origin[0] - (CapHeight(ND_SedMod) - CapThickness(ND_SedMod))*sin(AN_SedPlate) - (L_SedPlate - S_SedLaminaPipeToEdge - outerradius(ND_SedMod))*cos(AN_SedPlate))/2 = -0.160074 m
SedModMirrorLineZ := ((Z_SedLamellaBottom + T_SedPlate*cos(AN_SedPlate) + (L_SedPlate - S_SedLaminaPipeToEdge - outerradius(ND_SedMod))*sin(AN_SedPlate)) + (SedModCap_Origin[2] - (CapHeight(ND_SedMod) - CapThickness(ND_SedMod))*cos(AN_SedPlate)))/2 = 1.0709 m
# Lamella
MakeSedLamina := BoxF(Lamina_Origin, Lamina_Origin + [T_SedPlate; W_Sed; L_SedPlate], [0; -90 deg + AN_SedPlate; 0])
ArraySedLamina := ArrayLast(1, N_SedModPlates, -B_SedPlate/sin(AN_SedPlate))
SedLaminaScript := stack(SedLaminaLayer, MakeSedLamina, ArraySedLamina, SedLaminaFrz)
# Module Connector Caps
SedModCapRight := CapF(SedModCap_Origin, [0; 0; 0], ND_SedModulePipe)
SedModCapLeft := CapF(SedModCap_Origin - [
    B_SedPlate*(N_SedModPlates - 1) + T_SedPlate + 2*(CapHeight(ND_SedMod) - ConRadius(ND_SedMod) + outerradius(ND_SedMod));
    0 m;
    0 m
], [0; 180 deg; 0], ND_SedMod)
SedModCapScript := stack(SedModCapLayer, SedModCapRight, SedModCapLeft, SedModCapFrz)
# Module Connector Pipes and Spacers
SedModPipe := PipeF(SedModCap_Origin, B_SedPlate*(N_SedModPlates - 1) + T_SedPlate + 2*(CapHeight(ND_SedMod) - ConRadius(ND_SedMod) + outerradius(ND_SedMod)), [0; 0; 0], ND_SedMod, PS_Modules)
SedModSpacers := PipeF(SedModCap_Origin - [CapHeight(ND_SedMod) + T_SedPlate - CapThickness(ND_SedMod); 0; 0], B_SedPlate - T_SedPlate, [0; 0; 0], ND_SedModSpacer, PS_Modules)
ArraySedModSpacers := ArrayLast(1, N_SedModPlates - 1, -B_SedPlate)
SedModPipeScript := stack(SedModPipeLayer, SedModPipe, SedModPipeFrz, SedModSpacerLayer, SedModSpacers, ArraySedModSpacers, SedModSpacerFrz)
# Rotate and Array Connectors and Array Modules
ThawSedModPiping := ThawMultiple(["SedMod*Plu"])
RotateSedModPiping := Rotate_All([SedModCap_Origin[0]; SedModCap_Origin[2]; SedModCap_Origin[1]], 90 deg - AN_SedPlate)
MirrorSedModPipingUp := MirrorAll([SedModMirrorLineX; SedModMirrorLineZ], [SedModMirrorLineX; SedModMirrorLineZ] + [zc; zc/tan(AN_SedPlate)], "n")
TripleSedModPiping := array_all(3, 1, (W_SedPlate - 2*(S_SedLaminaPipeToEdge + outerradius(ND_SedModulePipe)))/2)
ThawSedModLamella := ThawMultiple(["SedModLamella"])
ArraySedMod := array_all(1, N_SedModules, -B_SedPlate*N_SedModPlates/sin(AN_SedPlate))
FreezeSedModComponents := FreezeMultiple(["SedMod*"])
SedModArrayScript := stack(ThawSedModPiping, view("f"), RotateSedModPiping, MirrorSedModPipingUp, view("t"), TripleSedModPiping, ThawSedModLamella, ArraySedMod, FreezeSedModComponents)
SedLamellaScript := stack(SedLaminaScript, SedModCapScript, SedModPipeScript, SedModArrayScript)
# Plate Settler Support Frame
B_SedPlateFrameCrossEst := 0.8 m  # ND_SedPlateFrame
N_SedFrameCrossPipe := max(round((L_SedUpflow - 2*ConRadius(ND_SedPlateFrame))/B_SedPlateFrameCrossEst), 3) = 5
B_SedPlateFrameCross := (L_SedUpflow - 2*ConRadius(ND_SedPlateFrame))/(N_SedFrameCrossPipe - 1)
# Origin points:
SedFrameCentralTee1_Origin := [
    -ConRadius(ND_SedPlateFrame) - ShortTeeLength(ND_SedPlateFrame);
    W_Sed/2 - SocketDepth(ND_SedPlateFrame) - TeeLength(ND_SedPlateFrame)/2;
    Z_SedLamellaSupportLedge + ConRadius(ND_SedPlateFrame)
]
SedFrameCentralTee2_Origin := SedFrameCentralTee1_Origin + [-B_SedPlateFrameCross + 2*ShortTeeLength(ND_SedPlateFrame); 0 m; 0 m]
SedFrameCentralTee3_Origin := SedFrameCentralTee1_Origin + [-B_SedPlateFrameCross; 2*SocketDepth(ND_SedPlateFrame) + TeeLength(ND_SedPlateFrame); 0 m]
SedFrameCentralTee4_Origin := SedFrameCentralTee1_Origin + [
    -2*B_SedPlateFrameCross + 2*ShortTeeLength(ND_SedPlateFrame);
    2*SocketDepth(ND_SedPlateFrame) + TeeLength(ND_SedPlateFrame);
    0 m
]
SedFrameElbow1_Origin := [
    -ConRadius(ND_SedPlateFrame) - ElbowRadius(ND_SedPlateFrame);
    ConRadius(ND_SedPlateFrame);
    Z_SedLamellaSupportLedge + ConRadius(ND_SedPlateFrame)
]
SedFrameElbow2_Origin := SedFrameElbow1_Origin + [0 m; W_Sed - 2*ConRadius(ND_SedPlateFrame); 0 m]
SedFrameElbow3_Origin := SedFrameElbow1_Origin + [-(N_SedFrameCrossPipe - 1)*B_SedPlateFrameCross + 2*ElbowRadius(ND_SedPlateFrame); 0 m; 0 m]
SedFrameElbow4_Origin := SedFrameElbow2_Origin + [-(N_SedFrameCrossPipe - 1)*B_SedPlateFrameCross + 2*ElbowRadius(ND_SedPlateFrame); 0 m; 0 m]
SedFrameSideTee1_Origin := [
    -ConRadius(ND_SedPlateFrame) - B_SedPlateFrameCross;
    ConRadius(ND_SedPlateFrame) + ShortTeeLength(ND_SedPlateFrame);
    Z_SedLamellaSupportLedge + ConRadius(ND_SedPlateFrame)
]
SedFrameSideTee2_Origin := SedFrameSideTee1_Origin + [0 m; W_Sed - 2*ConRadius(ND_SedPlateFrame) - 2*ShortTeeLength(ND_SedPlateFrame); 0 m]
SedFrameInnerCrossPipe1_Origin := [
    -ConRadius(ND_SedPlateFrame) - B_SedPlateFrameCross;
    ConRadius(ND_SedPlateFrame) + ShortTeeLength(ND_SedPlateFrame);
    Z_SedLamellaSupportLedge + ConRadius(ND_SedPlateFrame)
]
L_SedFrameInnerCrossPipe1 := W_Sed/2 - ConRadius(ND_SedPlateFrame) - ShortTeeLength(ND_SedPlateFrame) - SocketDepth(ND_SedPlateFrame) - TeeLength(ND_SedPlateFrame)
SedFrameInnerCrossPipe2_Origin := SedFrameInnerCrossPipe1_Origin + [
    0 m;
    W_Sed/2 - ConRadius(ND_SedPlateFrame) - ShortTeeLength(ND_SedPlateFrame) - SocketDepth(ND_SedPlateFrame);
    0 m
]
SedFrameInnerCrossPipe3_Origin := SedFrameInnerCrossPipe2_Origin + [0 m; 2*SocketDepth(ND_SedPlateFrame) + TeeLength(ND_SedPlateFrame); 0 m]
# Plate Frame Fittings
SedFrameCentralTee1 := TeeF(SedFrameCentralTee1_Origin, [90; 0; 0]*deg, ND_SedPlateFrame, PS_Default)
SedFrameCentralTee2 := TeeF(SedFrameCentralTee2_Origin, [-90; 0; 0]*deg, ND_SedPlateFrame, PS_Default)
ArrayPlateFrameCentralTees_1and2 := ArrayLast(1, floor(N_SedFrameCrossPipe/2), -2*B_SedPlateFrameCross)
SedFrameCentralTee3 := TeeF(SedFrameCentralTee3_Origin, [90; 0; 0]*deg, ND_SedPlateFrame, PS_Default)
SedFrameCentralTee4 := TeeF(SedFrameCentralTee4_Origin, [-90; 0; 0]*deg, ND_SedPlateFrame, PS_Default)
ArrayPlateFrameCentralTees_3and4 := ArrayLast(1, max(floor((N_SedFrameCrossPipe - 1)/2), 1), -2*B_SedPlateFrameCross)
SedPlateFrameCentralTeeScript := stack(SedPlateFrameFittingsLayer, SedFrameCentralTee1, ArrayPlateFrameCentralTees_1and2, SedFrameCentralTee2, ArrayPlateFrameCentralTees_1and2, SedFrameCentralTee3, ArrayPlateFrameCentralTees_3and4, SedFrameCentralTee4, ArrayPlateFrameCentralTees_3and4)
SedFrameElbow1 := ElbowF(SedFrameElbow1_Origin, [-90; 0; 0]*deg, ND_SedPlateFrame, PS_Default)
SedFrameElbow2 := ElbowF(SedFrameElbow2_Origin, [-90; 0; 180]*deg, ND_SedPlateFrame, PS_Default)
SedFrameElbow3 := ElbowF(SedFrameElbow3_Origin, [90; 0; 180]*deg, ND_SedPlateFrame, PS_Default)
SedFrameElbow4 := ElbowF(SedFrameElbow4_Origin, [90; 0; 0]*deg, ND_SedPlateFrame, PS_Default)
SedPlateFrameElbowScript := stack(SedFrameElbow1, SedFrameElbow2, SedFrameElbow3, SedFrameElbow4)
SedFrameSideTee1 := TeeF(SedFrameSideTee1_Origin, [0; 0; 0]*deg, ND_SedPlateFrame, PS_Default)
SedFrameSideTee2 := TeeF(SedFrameSideTee2_Origin, [180; 0; 0]*deg, ND_SedPlateFrame, PS_Default)
ArrayPlateFrameSideTee := ArrayLast(1, N_SedFrameCrossPipe - 2, -B_SedPlateFrameCross)
SedPlateFrameSideTeeScript := stack(SedFrameSideTee1, ArrayPlateFrameSideTee, SedFrameSideTee2, ArrayPlateFrameSideTee, SedPlateFrameFittingsFrz)
SedPlateFrameFittingScript := stack(SedPlateFrameCentralTeeScript, SedPlateFrameElbowScript, SedPlateFrameSideTeeScript)
# Plate Frame Pipes
SedFrameCentralPipe1 := PipeF(SedFrameCentralTee1_Origin, B_SedPlateFrameCross - 2*ShortTeeLength(ND_SedPlateFrame), [0; 0]*deg, ND_SedPlateFrame, PS_Default)
SedFrameCentralPipe2 := PipeF(SedFrameCentralTee3_Origin, B_SedPlateFrameCross - 2*ShortTeeLength(ND_SedPlateFrame), [0; 0]*deg, ND_SedPlateFrame, PS_Default)
SedFrameSidePipe1 := PipeF(SedFrameElbow1_Origin, B_SedPlateFrameCross - TeeLength(ND_SedPlateFrame)/2 - ElbowRadius(ND_SedPlateFrame), [0; 0]*deg, ND_SedPlateFrame, PS_Default)
SedFrameSidePipe2 := PipeF(SedFrameElbow2_Origin, B_SedPlateFrameCross - TeeLength(ND_SedPlateFrame)/2 - ElbowRadius(ND_SedPlateFrame), [0; 0]*deg, ND_SedPlateFrame, PS_Default)
ArraySedSidePipe1and2 := ArrayLast(1, 2, -B_SedPlateFrameCross*(N_SedFrameCrossPipe - 2) - TeeLength(ND_SedPlateFrame)/2 + ElbowRadius(ND_SedPlateFrame))
SedFrameSidePipe3 := PipeF(SedFrameElbow1_Origin + [-B_SedPlateFrameCross - TeeLength(ND_SedPlateFrame)/2 + ElbowRadius(ND_SedPlateFrame); 0 m; 0 m], B_SedPlateFrameCross - TeeLength(ND_SedPlateFrame), [0; 0]*deg, ND_SedPlateFrame, PS_Default)
SedFrameSidePipe4 := PipeF(SedFrameElbow2_Origin + [-B_SedPlateFrameCross - TeeLength(ND_SedPlateFrame)/2 + ElbowRadius(ND_SedPlateFrame); 0 m; 0 m], B_SedPlateFrameCross - TeeLength(ND_SedPlateFrame), [0; 0]*deg, ND_SedPlateFrame, PS_Default)
ArraySedSidePipe3and4 := ArrayLast(1, N_SedFrameCrossPipe - 3, -B_SedPlateFrameCross)
SedFrameInnerCrossPipe1 := PipeF(SedFrameInnerCrossPipe1_Origin, L_SedFrameInnerCrossPipe1, [-90; 0]*deg, ND_SedPlateFrame, PS_Default)
SedFrameInnerCrossPipe2 := PipeF(SedFrameInnerCrossPipe2_Origin, 2*SocketDepth(ND_SedPlateFrame), [-90; 0]*deg, ND_SedPlateFrame, PS_Default)
SedFrameInnerCrossPipe3 := PipeF(SedFrameInnerCrossPipe3_Origin, L_SedFrameInnerCrossPipe1, [-90; 0]*deg, ND_SedPlateFrame, PS_Default)
SedFramePipeScript1 := stack(SedPlateFramePipesLayer, SedFrameCentralPipe1, ArrayPlateFrameCentralTees_1and2, SedFrameCentralPipe2, ArrayPlateFrameCentralTees_3and4, SedFrameSidePipe1, ArraySedSidePipe1and2, SedFrameSidePipe2, ArraySedSidePipe1and2)
SedFramePipeScript2 := stack(SedFrameSidePipe3, ArraySedSidePipe3and4, SedFrameSidePipe4, ArraySedSidePipe3and4)
SedFramePipeScript3 := stack(SedFrameInnerCrossPipe1, ArrayPlateFrameSideTee, SedFrameInnerCrossPipe2, ArrayPlateFrameSideTee, SedFrameInnerCrossPipe3, ArrayPlateFrameSideTee, SedPlateFramePipesFrz)
SedFramePipeScript :=
    stack(SedFramePipeScript1, SedFramePipeScript2, SedFramePipeScript3) if N_SedFrameCrossPipe > 3
    stack(SedFramePipeScript1, SedFramePipeScript3) otherwise
# [component: inputs stack(SedConScript, SedSludgeDrainScript, SedManifoldScript, SedLaunderScript, SedHopperDrainScript, SedLamellaScript, SedPlateFrameFittingScript, SedFramePipeScript)]
SedSupportPipeTrans1 := PipeSUBF([
    Plant_Origin[0] - ConRadius(SedSupportPipeND) - SedSupportSpace;
    Plant_Origin[1];
    Z_SedLamellaBottom - SedSupportPipeND/2
], W_Sed/2 - TeeLength(SedSupportPipeND) - SocketDepth(SedSupportPipeND), [-90; 0]*deg, SedSupportPipeND, PS_Default, ["SedTankCon"])
SedSupportHoles1 := BoxF([
    Plant_Origin[0] - ConRadius(SedSupportPipeND) - outerradius(SedSupportPipeND) - SedSupportSpace;
    Plant_Origin[1] + T_ConcreteMin;
    Z_SedLamellaBottom - SedSupportPipeND/2
], [
    Plant_Origin[0] - SedSupportPipeND/2 + outerradius(SedSupportPipeND) - SedSupportSpace;
    Plant_Origin[1];
    Z_SedLamellaBottom
], [0; 0; 0]*deg)
SedSubtractSupportHoles := SubtractF(["SedTankCon"], "DeleteMe")
SedSupportPipeTrans2 := PipeSUBF([
    Plant_Origin[0] - ConRadius(SedSupportPipeND) - SedSupportSpace;
    Plant_Origin[1] + T_ConcreteMin + (W_Sed/2 - T_ConcreteMin - SocketDepth(SedSupportPipeND));
    Z_SedLamellaBottom - SedSupportPipeND/2
], 2*SocketDepth(SedSupportPipeND), [-90; 0]*deg, SedSupportPipeND, PS_Default, ["SedTankCon"])
SedSupportPipeTrans3 := PipeSUBF([
    Plant_Origin[0] - ConRadius(SedSupportPipeND) - SedSupportSpace;
    Plant_Origin[1] + T_ConcreteMin + (W_Sed - 2*T_ConcreteMin)/2 + TeeLength(SedSupportPipeND) + SocketDepth(SedSupportPipeND);
    Z_SedLamellaBottom - SedSupportPipeND/2
], W_Sed/2 - TeeLength(SedSupportPipeND) - SocketDepth(SedSupportPipeND), [-90; 0]*deg, SedSupportPipeND, PS_Default, ["SedTankCon"])
SedSupportPipeTransArray := ArrayLast(1, N_SedSupportCrossPipe - 2, -SedSupportSpace)
SedSupportPipeTransMiddle := stack(SedSupportLayer, SedSupportPipeTrans1, SedSupportPipeTransArray, SedSupportPipeTrans2, SedSupportPipeTransArray, SedSupportPipeTrans3, SedSupportPipeTransArray)
SedSupportHolesMiddle := stack(SedSupportHolesLayer, SedSupportHoles1, SedSupportPipeTransArray, SedSupportHoles3, SedSupportPipeTransArray, GroupDelete, SedSubtractSupportHoles, SedSupportHolesClose)
SedSupportPipeTransFront := stack(PipeSUBF([
    Plant_Origin[0] - ConRadius(SedSupportPipeND);
    Plant_Origin[1];
    Z_SedLamellaBottom - SedSupportPipeND/2
], W_Sed/2 - TeeLength(SedSupportPipeND) - SocketDepth(SedSupportPipeND), [-90; 0]*deg, SedSupportPipeND, PS_Default, ["SedTankCon"]), PipeSUBF([
    Plant_Origin[0] - ConRadius(SedSupportPipeND);
    Plant_Origin[1] + T_ConcreteMin + ((W_Sed - 2*T_ConcreteMin)/2 - SocketDepth(SedSupportPipeND));
    Z_SedLamellaBottom - SedSupportPipeND/2
], W_Sed/2 + SocketDepth(SedSupportPipeND), [-90; 0]*deg, SedSupportPipeND, PS_Default, ["SedTankCon"]))
# W.Sed needs to be changed in DistY below
SedSupportPipeTransEnd :=
    Script ← SelectLayer("SedModSupportPlu")
    for i ∈ N_SedSupportCrossPipe
        if mod(i, 2) == 1
            SedSupportPipeTrans ← stack(PipeSUBF([
                Plant_Origin[0] - ConRadius(SedSupportPipeND) - (i - 1)*SedSupportSpace;
                Plant_Origin[1];
                Z_SedLamellaBottom - SedSupportPipeND/2
            ], W_Sed/2 + SocketDepth(SedSupportPipeND), [-90; 0]*deg, SedSupportPipeND, PS_Default, ["SedTankCon"]), PipeSUBF([
                Plant_Origin[0] - ConRadius(SedSupportPipeND) - (i - 1)*SedSupportSpace;
                Plant_Origin[1] + T_ConcreteMin + W_Sed/2 - T_ConcreteMin + TeeLength(SedSupportPipeND) + SocketDepth(SedSupportPipeND);
                Z_SedLamellaBottom - SedSupportPipeND/2
            ], W_Sed/2 - TeeLength(SedSupportPipeND), [-90; 0]*deg, SedSupportPipeND, PS_Default, ["SedTankCon"]))
        otherwise
            SedSupportPipeTrans ← stack(PipeSUBF([
                Plant_Origin[0] - ConRadius(SedSupportPipeND) - (i - 1)*SedSupportSpace;
                Plant_Origin[1];
                Z_SedLamellaBottom - SedSupportPipeND/2
            ], W_Sed/2 - TeeLength(SedSupportPipeND) - SocketDepth(SedSupportPipeND), [-90; 0]*deg, SedSupportPipeND, PS_Default, ["SedTankCon"]), PipeSUBF([
                Plant_Origin[0] - ConRadius(SedSupportPipeND) - (i - 1)*SedSupportSpace;
                Plant_Origin[1] + T_ConcreteMin + ((W_Sed - 2*T_ConcreteMin)/2 - SocketDepth(SedSupportPipeND));
                Z_SedLamellaBottom - SedSupportPipeND/2
            ], W_Sed/2 + SocketDepth(SedSupportPipeND), [-90; 0]*deg, SedSupportPipeND, PS_Default, ["SedTankCon"]))
        Script ← stack(Script, SedSupportPipeTrans)
    return Script
SedSupportHolesEndScript :=
    Script ← SelectLayer("SedSupportHoles")
    for i ∈ N_SedSupportCrossPipe
        SedSupportHolesEnd ← stack(BoxF([
            Plant_Origin[0] - outerradius(SedSupportPipeND) - ConRadius(SedSupportPipeND) - (i - 1)*SedSupportSpace;
            Plant_Origin[1];
            Z_SedLamellaBottom - SedSupportPipeND/2
        ], [
            Plant_Origin[0] - ConRadius(SedSupportPipeND) + outerradius(SedSupportPipeND) - (i - 1)*SedSupportSpace;
            Plant_Origin[1] + T_ConcreteMin;
            Z_SedLamellaBottom
        ], [0; 0; 0]*deg), BoxF([
            Plant_Origin[0] - outerradius(SedSupportPipeND) - ConRadius(SedSupportPipeND) - (i - 1)*SedSupportSpace;
            Plant_Origin[1] + W_Sed - T_ConcreteMin;
            Z_SedLamellaBottom - SedSupportPipeND/2
        ], [
            Plant_Origin[0] - ConRadius(SedSupportPipeND) + outerradius(SedSupportPipeND) - (i - 1)*SedSupportSpace;
            Plant_Origin[1] + W_Sed;
            Z_SedLamellaBottom
        ], [0; 0; 0]*deg))
        Script ← stack(Script, SedSupportHolesEnd, GroupDelete, SedSubtractSupportHoles, SedSupportHolesClose)
    return Script
SedSupportPipeLong :=
    Script ← SelectLayer("SedModSupportPlu")
    for i ∈ 1 .. N_SedSupportCrossPipe - 1
        if mod(i, 2) == 1
            SedSupportPipeLong ← PipeF([
                Plant_Origin[0] - ConRadius(SedSupportPipeND) - TeeLength(SedSupportPipeND)/2 - (i - 1)*SedSupportSpace;
                Plant_Origin[1] + W_Sed/2 - TeeLength(SedSupportPipeND)/2 - SocketDepth(SedSupportPipeND);
                Z_SedLamellaBottom - SedSupportPipeND/2
            ], SedSupportSpace - TeeLength(SedSupportPipeND), [0; 0]*deg, SedSupportPipeND, PS_Default)
        otherwise
            SedSupportPipeLong ← PipeF([
                Plant_Origin[0] - ConRadius(SedSupportPipeND) - TeeLength(SedSupportPipeND)/2 - (i - 1)*SedSupportSpace;
                (Plant_Origin[1] + W_Sed/2 + TeeLength(SedSupportPipeND)/2) + SocketDepth(SedSupportPipeND);
                Z_SedLamellaBottom - SedSupportPipeND/2
            ], SedSupportSpace - TeeLength(SedSupportPipeND), [0; 0]*deg, SedSupportPipeND, PS_Default)
        Script ← stack(Script, SedSupportPipeLong)
    return Script
SedSupportTees :=
    Script ← layer_new("SedModSupportTees", green)
    for i ∈ 1 .. N_SedSupportCrossPipe - 1
        if mod(i, 2) == 1
            SedSupportTees ← stack(TeeF([
                Plant_Origin[0] - ConRadius(SedSupportPipeND) - TeeLength(SedSupportPipeND)/2 - (i - 1)*SedSupportSpace;
                Plant_Origin[1] + W_Sed/2 - TeeLength(SedSupportPipeND)/2 - SocketDepth(SedSupportPipeND);
                Z_SedLamellaBottom - SedSupportPipeND/2
            ], [90; 0; 0]*deg, SedSupportPipeND, PS_Default), Mirror3dLast("yz", [
                Plant_Origin[0] - ConRadius(SedSupportPipeND) - (i - 1)*SedSupportSpace - SedSupportSpace/2;
                Plant_Origin[1] + W_Sed/2 - TeeLength(SedSupportPipeND)/2 - SocketDepth(SedSupportPipeND);
                Z_SedLamellaBottom - SedSupportPipeND/2
            ], "n"))
        otherwise
            SedSupportTees ← stack(TeeF([
                Plant_Origin[0] - ConRadius(SedSupportPipeND) - TeeLength(SedSupportPipeND)/2 - (i - 1)*SedSupportSpace;
                (Plant_Origin[1] + W_Sed/2) + TeeLength(SedSupportPipeND)/2 + SocketDepth(SedSupportPipeND);
                Z_SedLamellaBottom - SedSupportPipeND/2
            ], [90; 0; 0]*deg, SedSupportPipeND, PS_Default), Mirror3dLast("yz", [
                Plant_Origin[0] - ConRadius(SedSupportPipeND) - (i - 1)*SedSupportSpace - SedSupportSpace/2;
                Plant_Origin[1] + W_Sed/2 - TeeLength(SedSupportPipeND)/2 - SocketDepth(SedSupportPipeND);
                Z_SedLamellaBottom - SedSupportPipeND/2
            ], "n"))
        Script ← stack(Script, SedSupportTees)
    return Script
SedSupportPipe := stack(SedSupportHolesMiddle, SedSupportPipeTransMiddle, SedSupportPipeTransFront, FreezeLayer("SedModSupportPlu"), SedSupportHolesEndScript, SedSupportHolesFrontScript, SedSupportPipeTransEnd, FreezeLayer("SedModSupportPlu"), SedSupportPipeLong, FreezeLayer("SedModSupportPlu"))
SedSupportTeeConnections := stack(SedSupportTees, FreezeLayer("SedModSupportTees"))
SedSupport := stack(SedSupportPipe, SedSupportTeeConnections)
SedLamellaScript := stack(SedLaminaScript, SedModCapScript, SedModPipeScript, SedModArrayScript, SedSupport)
# Complete A Single Sed Tank (array and add walls) (diffusers added later since they are not arrayed)
ThawSedBayArray := ThawMultiple(["Sed*"])
ArraySedBay := array_all(N_SedBays, 1, W_Sed)
FreezeSedBayArray := FreezeMultiple(["Sed*"])
ArraySedBayScript := stack(ThawSedBayArray, FreezeSedModComponents, ArraySedBay, FreezeSedBayArray)
SedWallUnderChannel := BoxF([0 m; W_Sed; 0 m - DropSedBottom] + Plant_Origin, [
    -L_Sed + Plant_Origin[0];
    W_Sed + T_SedWallDivider + Plant_Origin[1];
    (Z_SedChannelBottom - DropSedBottom - T_ChannelWall)
], [0; 0; 0]*deg)
SedWallAboveChannel := BoxF([0 m; W_Sed; H_Sed] + Plant_Origin, [
    -L_Sed + W_SedInletChannel + W_SedExitChannel + T_ChannelWall + T_SedWeir;
    W_Sed + T_SedWallDivider;
    H_Sed - Z_SedChannelBottom - T_ChannelWall
] + Plant_Origin, [0; 0; 0]*deg)
SedPlateSupportLedgeScript := stack(SelectSedCon, SedWallUnderChannel, SedWallAboveChannel, FreezeSedTank)
CompleteSedTank :=
    SedPlateSupportLedgeScript if N_SedBays == 1
    stack(ArraySedBayScript, SedPlateSupportLedgeScript) otherwise
# Array Sed Tanks
ThawAllSed := ThawMultiple(["Sed*"])
ArraySedTank := Array_All(N_SedTanks, 1, W_Sed + T_SedWallDivider)
FreezeAllSed := FreezeMultiple(["Sed*"])
SelectSedConcrete := ThawMultiple(["SedTankCon"; "DrainPipeBox"])
SedTankArrayScript := stack(ThawAllSed, FreezeSedModComponents, DrainPipeBoxFrz, ArraySedTank, FreezeAllSed, SelectSedConcrete, BrepAll, Union_All, FreezeSedTank, DrainPipeBoxFrz)
# Inlet Manifold Diffusers
# Edited by dfg42 on 3/23/15 to move first orifice away from floc weir
# to account for fernco fitting and pipe stub jutting out from weir
SedDiffuser_Origin := [
    Plant_Origin[0] - L_Sed + L_SedHopper + L_SedDiffuserOutlet/2 + S_Fitting + L_SedManifoldPipeFromFlocWeir + T_SedDiffuserWall + (W_SedInletChannelPreWeir + T_ChannelWall)*(EN_InletChannelGeom == Inlet_FullDepth);
    SedManPipe_Origin[1];
    -innerdiameter(ND_SedManifold, PS_Default)/2 + SedManPipe_Origin[2]
]
SedDiffLayer := layer_new("SedManifoldDiffuserPlu", blue)
SedDiffOuterCircleSection := circle([SedDiffuser_Origin[0]; SedDiffuser_Origin[1]; SedDiffuser_Origin[2]], outerradius(ND_SedDiffuser))
SedDiffOuterRectangleSection := Pline3D([
    [
        SedDiffuser_Origin[0] + L_SedDiffuserOutlet/2 + T_SedDiffuserWall;
        SedDiffuser_Origin[1] + W_SedDiffuserOutlet/2 + T_SedDiffuserWall;
        SedDiffuser_Origin[2] - L_SedManifoldDiffuser
    ];
    [
        SedDiffuser_Origin[0] - L_SedDiffuserOutlet/2 - T_SedDiffuserWall;
        SedDiffuser_Origin[1] + W_SedDiffuserOutlet/2 + T_SedDiffuserWall;
        SedDiffuser_Origin[2] - L_SedManifoldDiffuser
    ];
    [
        SedDiffuser_Origin[0] - L_SedDiffuserOutlet/2 - T_SedDiffuserWall;
        SedDiffuser_Origin[1] - W_SedDiffuserOutlet/2 - T_SedDiffuserWall;
        SedDiffuser_Origin[2] - L_SedManifoldDiffuser
    ];
    [
        SedDiffuser_Origin[0] + L_SedDiffuserOutlet/2 + T_SedDiffuserWall;
        SedDiffuser_Origin[1] - W_SedDiffuserOutlet/2 - T_SedDiffuserWall;
        SedDiffuser_Origin[2] - L_SedManifoldDiffuser
    ];
    [
        SedDiffuser_Origin[0] + L_SedDiffuserOutlet/2 + T_SedDiffuserWall;
        SedDiffuser_Origin[1] + W_SedDiffuserOutlet/2 + T_SedDiffuserWall;
        SedDiffuser_Origin[2] - L_SedManifoldDiffuser
    ]
])
SedDiffZoomOuter := ZoomWindow([SedDiffuser_Origin[0] - L_SedDiffuserOutlet; SedDiffuser_Origin[1] + W_SedDiffuserOutlet], [SedDiffuser_Origin[0] + L_SedDiffuserOutlet; SedDiffuser_Origin[1] - W_SedDiffuserOutlet])
SedDiffOuterLoft := Loft([SedDiffuser_Origin[0] + outerradius(ND_SedDiffuser); SedDiffuser_Origin[1]; SedDiffuser_Origin[2]], [
    SedDiffuser_Origin[0] + L_SedDiffuserOutlet/2 + T_SedDiffuserWall;
    SedDiffuser_Origin[1] + W_SedDiffuserOutlet/2 + T_SedDiffuserWall;
    SedDiffuser_Origin[2] - L_SedManifoldDiffuser
])
SedDiffuserFreeze := FreezeLayer("SedManifoldDiffuserPlu")
SedDiffInnerCircleSection := circle([SedDiffuser_Origin[0]; SedDiffuser_Origin[1]; SedDiffuser_Origin[2]], innerdiameter(ND_SedDiffuser, PS_Default)/2)
SedDiffInnerRectangleSection := Pline3D([
    [
        SedDiffuser_Origin[0] + L_SedDiffuserOutlet/2;
        SedDiffuser_Origin[1] + W_SedDiffuserOutlet/2;
        SedDiffuser_Origin[2] - L_SedManifoldDiffuser
    ];
    [
        SedDiffuser_Origin[0] - L_SedDiffuserOutlet/2;
        SedDiffuser_Origin[1] + W_SedDiffuserOutlet/2;
        SedDiffuser_Origin[2] - L_SedManifoldDiffuser
    ];
    [
        SedDiffuser_Origin[0] - L_SedDiffuserOutlet/2;
        SedDiffuser_Origin[1] - W_SedDiffuserOutlet/2;
        SedDiffuser_Origin[2] - L_SedManifoldDiffuser
    ];
    [
        SedDiffuser_Origin[0] + L_SedDiffuserOutlet/2;
        SedDiffuser_Origin[1] - W_SedDiffuserOutlet/2;
        SedDiffuser_Origin[2] - L_SedManifoldDiffuser
    ];
    [
        SedDiffuser_Origin[0] + L_SedDiffuserOutlet/2;
        SedDiffuser_Origin[1] + W_SedDiffuserOutlet/2;
        SedDiffuser_Origin[2] - L_SedManifoldDiffuser
    ]
])
SedDiffZoomInner := ZoomWindow([SedDiffuser_Origin[0] - L_SedDiffuserOutlet; SedDiffuser_Origin[1] + W_SedDiffuserOutlet], [SedDiffuser_Origin[0] + L_SedDiffuserOutlet; SedDiffuser_Origin[1] - W_SedDiffuserOutlet])
SedDiffInnerLoft := Loft([
    SedDiffuser_Origin[0] + innerdiameter(ND_SedDiffuser, PS_Default)/2;
    SedDiffuser_Origin[1];
    SedDiffuser_Origin[2]
], [
    SedDiffuser_Origin[0] + L_SedDiffuserOutlet/2;
    SedDiffuser_Origin[1] + W_SedDiffuserOutlet/2;
    SedDiffuser_Origin[2] - L_SedManifoldDiffuser
])
SedDiffGroupInner := GroupAll("DeleteMe")
SedDiffSubtract := SubtractF(["SedManifoldDiffuserPlu"], "DeleteMe")
SedDiffSelect := SelectLayer("SedManifoldDiffuserPlu")
SedDiffArray := Array_All(1, N_SedManifoldPorts, B_SedManifoldPort)
SedDiffuserScript := stack(SedDiffLayer, SedDiffOuterCircleSection, SedDiffOuterRectangleSection, SedDiffZoomOuter, SedDiffOuterLoft, SedDiffuserFreeze, SedDiffInnerCircleSection, SedDiffInnerRectangleSection, SedDiffZoomInner, SedDiffInnerLoft, SedDiffGroupInner, SedDiffSubtract, SedDiffSelect, SedDiffArray, SedDiffuserFreeze)
# Finish Inlet and Exit Channels, and add last wall
# Finish tank walls
SelectSedCon
# Added DropSedBottom to box mrf222 10/7/14
SedLowerWall := BoxF([-L_Sed - T_PlantWall; -T_PlantWall; H_Sed] + Plant_Origin, Plant_Origin + [T_PlantWall; 0; -DropSedBottom], [0; 0; 0]*deg)
SedWallTopUnderChannel := BoxF([0 m; (W_Sed + T_SedWallDivider)*N_SedTanks - T_SedWallDivider + T_PlantWall; 0 m] + Plant_Origin, [
    -L_Sed + Plant_Origin[0];
    -T_SedWallDivider + (W_Sed + T_SedWallDivider)*N_SedTanks + Plant_Origin[1];
    Z_SedChannelBottom - T_ChannelWall
], [0; 0; 0]*deg)
SedWallTopAboveChannel := BoxF([0 m; (W_Sed + T_SedWallDivider)*N_SedTanks - T_SedWallDivider + T_PlantWall; H_Sed] + Plant_Origin, [
    -L_Sed + W_SedInletChannel + W_SedExitChannel + T_ChannelWall + T_SedWeir;
    -T_SedWallDivider + (W_Sed + T_SedWallDivider)*N_SedTanks + Plant_Origin[1];
    H_Sed - Z_SedChannelBottom - T_ChannelWall
] + Plant_Origin, [0; 0; 0]*deg)
SedChannelCap := BoxF([
    -L_Sed + W_SedInletChannelPreWeir;
    (W_Sed + T_SedWallDivider)*N_SedTanks - T_SedWallDivider + T_PlantWall;
    H_Sed
] + Plant_Origin, [
    -L_Sed + W_SedInletChannel + W_SedExitChannel + T_SedWeir + Plant_Origin[0];
    -T_SedWallDivider + (W_Sed + T_SedWallDivider)*N_SedTanks + Plant_Origin[1];
    Z_SedChannelBottom
], [0; 0; 0]*deg) = "_box -5.18002,2.4336,1.65372 -4.58002,2.2836,1.21178"
SedTankWalls := stack(SelectSedCon, SedLowerWall, SedChannelCap, SedWallTopUnderChannel, SedWallTopAboveChannel)
# Channel Weirs and Dividing Wall
SedInletChannelYWeir := BoxF([
    Plant_Origin[0] - L_Sed + W_SedInletChannelPreWeir;
    Plant_Origin[1] + 2*(S_Fitting + ConRadius(ND_SedExitChannelDrain));
    Z_SedChannelBottom
], [
    Plant_Origin[0] - L_Sed + W_SedInletChannelPreWeir + T_SedWeir;
    Plant_Origin[1] - T_PlantWall + (W_Sed*N_SedBays + T_PlantWall)*N_SedTanks;
    Z_SedChannelBottom + H_SedWeirInlet
], [0; 0; 0]*deg)
SedInletChannelXWeir := BoxF([
    Plant_Origin[0] - L_Sed + W_SedInletChannelPreWeir;
    Plant_Origin[1] + 2*(S_Fitting + ConRadius(ND_SedExitChannelDrain));
    Z_SedChannelBottom
], [
    Plant_Origin[0] - L_Sed;
    Plant_Origin[1] + 2*(S_Fitting + ConRadius(ND_SedExitChannelDrain)) + T_SedWeir;
    Z_SedChannelBottom + H_SedWeirInlet
], [0; 0; 0]*deg)
SedChannelDivider := BoxF([Plant_Origin[0] - L_Sed + W_SedInletChannel; Plant_Origin[1]; Z_SedChannelBottom], [
    Plant_Origin[0] - L_Sed + W_SedInletChannel + T_SedWeir;
    Plant_Origin[1] - T_PlantWall + (W_Sed*N_SedBays + T_PlantWall)*N_SedTanks;
    Z_SedChannelBottom + H_SedInletChannel
], [0; 0; 0]*deg)
SedExitChannelWeirY := BoxF([
    Plant_Origin[0] - L_Sed + W_SedInletChannel + T_SedWeir + W_SedExitChannelPostWeir;
    Plant_Origin[1];
    Z_SedChannelBottom
], [
    Plant_Origin[0] - L_Sed + W_SedInletChannel + 2*T_SedWeir + W_SedExitChannelPostWeir;
    Plant_Origin[1] - T_PlantWall + (W_Sed*N_SedBays + T_SedWallDivider)*N_SedTanks - S_Fitting - OuterDiameterFittingPVC(ND_FiEntrancePipe);
    Z_SedChannelBottom + H_SedWeirExit
], [0; 0; 0]*deg)
SedExitChannelWeirX := BoxF([
    Plant_Origin[0] - L_Sed + W_SedInletChannel + T_SedWeir + W_SedExitChannelPostWeir;
    Plant_Origin[1] - T_PlantWall + (W_Sed + T_SedWallDivider)*N_SedTanks - OuterDiameterFittingPVC(ND_FiEntrancePipe) - S_Fitting - T_SedWeir;
    Z_SedChannelBottom
], [
    Plant_Origin[0] - L_Sed + W_SedInletChannel + 2*T_SedWeir + W_SedExitChannelPostWeir + W_SedExitChannelPreWeir;
    Plant_Origin[1] - T_PlantWall + (W_Sed + T_SedWallDivider)*N_SedTanks - S_Fitting - OuterDiameterFittingPVC(ND_FiEntrancePipe);
    Z_SedChannelBottom + H_SedWeirExit
], [0; 0; 0]*deg)
SedChannelWeirScript := stack(SedInletChannelYWeir, SedInletChannelXWeir, SedChannelDivider, SedExitChannelWeirY, SedExitChannelWeirX, Union_All, FreezeSedTank)
FinishSedChannelScript := stack(SedTankWalls, SedChannelWeirScript)
# Inlet Channel Drain
# Origins and Dimensions
SedIChannelDrainVertCoupling_Origin := [
    Plant_Origin[0] - L_Sed - T_PlantWall + max(T_PlantWall, CouplingLength(ND_SedInletChannelDrain)) + SocketDepth(ND_SedInletChannelDrain) + ElbowRadius(ND_SedInletChannelDrain);
    Plant_Origin[1] + S_Fitting + ConRadius(ND_SedInletChannelDrain);
    Plant_Origin[2] + Z_SedChannelBottom - CouplingLength(ND_SedInletChannelDrain) + SocketDepth(ND_SedInletChannelDrain)
]
L_SedIChannelVertPipe := Z_SedChannelBottom - CouplingLength(ND_SedInletChannelDrain) - ShortTeeLength(ND_SedInletChannelDrain) - ConRadius(ND_SedInletChannelDrain) = 0.975247 m
L_SedIChannelHorizPipe := SedIChannelDrainVertCoupling_Origin[0] - (Plant_Origin[0] - L_Sed - T_PlantWall) - TeeLength(ND_SedInletChannelDrain)/2 = 0.157106 m
# st587 11/20/2014
SedIChannelDrainHorizCoupling_Origin := [
    Plant_Origin[0] - T_PlantWall - SocketDepth(ND_SedExitChannelDrain) - L_Sed + CouplingLength(ND_SedExitChannelDrain);
    SedIChannelDrainVertCoupling_Origin[1];
    SedIChannelDrainVertCoupling_Origin[2] - L_SedIChannelVertPipe - ElbowRadius(ND_SedExitChannelDrain)
]
# Inlet Channel Drain Fittings
SedIChannelDrainVertCoupling := CouplingSUBF(SedIChannelDrainVertCoupling_Origin, [0; 90; 0]*deg, ND_SedInletChannelDrain, PS_Default, ["SedTankCon"])
SedIChannelDrainTee := TeeSUBF(SedIChannelDrainVertCoupling_Origin + [0 m; 0 m; -L_SedIChannelVertPipe], [0; 0; 90]*deg, ND_SedInletChannelDrain, PS_Default, ["SedTankCon"])
# st587; previously an elbow
SedIChannelHorizCoupling := CouplingSUBF(SedIChannelDrainHorizCoupling_Origin, [0; 0; 0]*deg, ND_SedExitChannelDrain, PS_Default, ["SedTankCon"])
SedInletChannelDrainFittingScript := stack(SelectSedFittings, SedIChannelDrainVertCoupling, SedIChannelDrainTee, SedFittingFrz)
distancefromflocweir := Z_SedChannelBottom - T_ChannelWall - Z_SedFlocWeir = 36.9138 cm
# Inlet Channel Drain Pipes
SedIChannelDrainHorizPipe := PipeSUBF(SedIChannelDrainVertCoupling_Origin + [
    -(TeeLength(ND_SedInletChannelDrain)/2);
    0;
    -L_SedIChannelVertPipe - ShortTeeLength(ND_SedInletChannelDrain)
], L_SedIChannelHorizPipe, [0; 0; 0]*deg, ND_SedInletChannelDrain, PS_Default, ["SedTankCon"])
SedIChannelDrainVertPipe := PipeSUBF(SedIChannelDrainVertCoupling_Origin, L_SedIChannelVertPipe, [0; 270; 0]*deg, ND_SedInletChannelDrain, PS_Default, ["SedTankCon"])
SedIChannelDrainStub := PipeF(SedIChannelDrainVertCoupling_Origin + [0 m; 0 m; CouplingLength(ND_SedInletChannelDrain) - 2*SocketDepth(ND_SedInletChannelDrain)], H_SedInletChannel + SocketDepth(ND_SedInletChannelDrain), [0; 90; 0]*deg, ND_SedInletChannelDrain, PS_Default)
SedInletDrainRemovables := layer_new("SedInletDrainRemovables", red)
SedInletDrainRemovablesSelect := SelectLayer("SedInletDrainRemovables")
SedInletDrainRemovablesFrz := FreezeLayer("SedInletDrainRemovables")
SedInletChannelDrainPipeScript := stack(SelectSedPipes, SedIChannelDrainHorizPipe, SedIChannelDrainVertPipe, SedPipeFrz, SedInletDrainRemovables, SedIChannelDrainStub, SedInletDrainRemovablesFrz)
SedInletDrainScript := stack(SedInletChannelDrainFittingScript, SedInletChannelDrainPipeScript)
# Exit Drain | added by st587
[
    Plant_Origin[0] - L_Sed - T_PlantWall + max(T_PlantWall, CouplingLength(ND_SedInletChannelDrain)) + SocketDepth(ND_SedInletChannelDrain) + ElbowRadius(ND_SedInletChannelDrain);
    Plant_Origin[1] + S_Fitting + ConRadius(ND_SedInletChannelDrain);
    Plant_Origin[2] + Z_SedChannelBottom - CouplingLength(ND_SedInletChannelDrain) + SocketDepth(ND_SedInletChannelDrain)
]
# Origins and Dimensions
SedEChannelDrainVertCoupling_Origin := [
    (Plant_Origin[0] - L_Sed + W_SedInletChannel + T_SedWeir + ConRadius(ND_FiEntrancePipe)) + S_Fitting;
    Plant_Origin[1] + S_Fitting + ConRadius(ND_SedInletChannelDrain);
    Plant_Origin[2] + Z_SedChannelBottom - CouplingLength(ND_SedInletChannelDrain) + SocketDepth(ND_SedInletChannelDrain)
]
L_SedEChannelVertPipe := Z_SedChannelBottom - CouplingLength(ND_SedInletChannelDrain) - ElbowRadius(ND_SedInletChannelDrain) - ConRadius(ND_SedInletChannelDrain) = 1.01414 m
L_SedEChannelHorizPipe := SedEChannelDrainVertCoupling_Origin[0] - SedIChannelDrainVertCoupling_Origin[0] - (TeeLength(ND_SedInletChannelDrain)/2) - ElbowRadius(ND_SedInletChannelDrain) = 0.503225 m
SedIChannelDrainHorizCoupling_Origin := [
    Plant_Origin[0] - T_PlantWall - SocketDepth(ND_SedExitChannelDrain) - L_Sed + CouplingLength(ND_SedExitChannelDrain);
    SedIChannelDrainVertCoupling_Origin[1];
    SedIChannelDrainVertCoupling_Origin[2] - L_SedIChannelVertPipe - ElbowRadius(ND_SedExitChannelDrain)
]
# Idk if this is needed
# Exit Channel Drain Fitting
SedEChannelDrainVertCoupling := CouplingSUBF(SedEChannelDrainVertCoupling_Origin, [0; 90; 0]*deg, ND_SedInletChannelDrain, PS_Default, ["SedTankCon"])
SedEChannelDrainElbow := ElbowSUBF(SedEChannelDrainVertCoupling_Origin + [0 m; 0 m; -L_SedEChannelVertPipe], [0; 0; 270]*deg, ND_SedInletChannelDrain, PS_Default, ["SedTankCon"])
SedIChannelHorizCoupling := CouplingSUBF(SedIChannelDrainHorizCoupling_Origin, [0; 0; 0]*deg, ND_SedExitChannelDrain, PS_Default, ["SedTankCon"])
SedExitChannelDrainFittingScript := stack(SelectSedFittings, SedEChannelDrainVertCoupling, SedEChannelDrainElbow, SedFittingFrz)
# Exit Channel Drain Pipes
SedIChannelDrainVertCoupling_Origin + [
    (TeeLength(ND_SedInletChannelDrain)/2);
    0;
    -L_SedIChannelVertPipe - ShortTeeLength(ND_SedInletChannelDrain)
]
SedEChannelDrainHorizPipe := PipeSUBF(SedEChannelDrainVertCoupling_Origin + [
    -ElbowRadius(ND_SedInletChannelDrain);
    0;
    -L_SedEChannelVertPipe - ElbowRadius(ND_SedInletChannelDrain)
], L_SedEChannelHorizPipe, [0; 0; 0]*deg, ND_SedInletChannelDrain, PS_Default, ["SedTankCon"])
SedEChannelDrainVertPipe := PipeSUBF(SedEChannelDrainVertCoupling_Origin, L_SedEChannelVertPipe, [0; 270; 0]*deg, ND_SedInletChannelDrain, PS_Default, ["SedTankCon"])
SedEChannelDrainStub := PipeF(SedEChannelDrainVertCoupling_Origin, H_SedInletChannel + SocketDepth(ND_SedInletChannelDrain), [0; 90; 0]*deg, ND_SedInletChannelDrain, PS_Default)
SedExitDrainRemovables := layer_new("SedExitDrainRemovables", red)
SedExitDrainRemovablesSelect := SelectLayer("SedExitDrainRemovables")
SedExitDrainRemovablesFrz := FreezeLayer("SedExitDrainRemovables")
SedExitChannelDrainPipeScript := stack(SelectSedPipes, SedEChannelDrainHorizPipe, SedEChannelDrainVertPipe, SedPipeFrz, SedExitDrainRemovables, SedEChannelDrainStub, SedExitDrainRemovablesFrz)
SedExitDrainScript := stack(SedExitChannelDrainFittingScript, SedExitChannelDrainPipeScript)
# Outlets to Filter
# Origins and Dimensions
# W.Sed needs to be changed in DistY below
SedOutletCoupling1_Origin(N) := [
    (Plant_Origin[0] - L_Sed + W_SedInletChannel + T_SedWeir + ConRadius(ND_FiEntrancePipe)) + S_Fitting;
    Plant_Origin[1] - T_PlantWall + (W_Sed*N_SedBays + T_SedWallDivider)*N_SedTanks - ConRadius(ND_FiEntrancePipe) - S_Fitting - (N - 1)*W_Sed - T_PlantWall*floor((N - 1)/N_SedBays);
    Z_SedChannelBottom - SocketDepth(ND_FiEntrancePipe)
]
st587
SedOutletVertPipe_Origin(N) := SedOutletCoupling1_Origin(N) + [0; 0; 2*SocketDepth(ND_FiEntrancePipe) - CouplingLength(ND_FiEntrancePipe)]
L_SedOutletVertPipe := 2*SocketDepth(ND_FiEntrancePipe) + max(0, T_ChannelWall - CouplingLength(ND_FiEntrancePipe))
SedOutletElbow_Origin(N) := SedOutletVertPipe_Origin(N) - [0; 0; L_SedOutletVertPipe]
SedOutletCoupling2_Origin(N) := [
    Plant_Origin[0] - T_PlantWall - L_Sed + CouplingLength(ND_FiEntrancePipe) - SocketDepth(ND_FiEntrancePipe);
    SedOutletElbow_Origin(N)[1];
    -ElbowRadius(ND_FiEntrancePipe) + SedOutletElbow_Origin(N)[2]
]
SedOutletHorizPipe_Origin(N) := [-ElbowRadius(ND_FiEntrancePipe); 0; -ElbowRadius(ND_FiEntrancePipe)] + SedOutletElbow_Origin(N)
N_Fi := 1
# If there are two filters, the second filter runs into the platform with the sed tanks on it. We need to move the outlet pipes to the filter down along the (y axis) outlet channel so that the filter also slides down.
MoveOutletDown :=
    1 if N_Fi ≥ 2
    0 otherwise
# Sed Outlet Fittings
SedOutletCoupling1Script :=
    Local ← SelectSedFittings
    for i ∈ 1 + MoveOutletDown .. N_FiEntrancePipes + MoveOutletDown
        OutletCoupling ← CouplingSUBF(SedOutletCoupling1_Origin(i), [0; 270]*deg, ND_FiEntrancePipe, PS_Default, ["SedTankCon"])
        Local ← stack(Local, OutletCoupling)
    Local ← stack(Local, SedFittingFrz)
    return Local
move
SedOutletElbowScript :=
    Local ← SelectSedFittings
    for i ∈ 1 + MoveOutletDown .. N_FiEntrancePipes + MoveOutletDown
        OutletElbow ← ElbowSUBF(SedOutletElbow_Origin(i), [0; 0; 270]*deg, ND_FiEntrancePipe, PS_Default, ["SedTankCon"])
        Local ← stack(Local, OutletElbow)
    Local ← stack(Local, SedFittingFrz)
    return Local
SedOutletCoupling2Script :=
    Local ← SelectSedFittings
    for i ∈ 1 + MoveOutletDown .. N_FiEntrancePipes + MoveOutletDown
        OutletCoupling ← CouplingSUBF(SedOutletCoupling2_Origin(i), [0; 0]*deg, ND_FiEntrancePipe, PS_Default, ["SedTankCon"])
        Local ← stack(Local, OutletCoupling)
    Local ← stack(Local, SedFittingFrz)
    return Local
# Sed Outlet Pipes
SedOutletVertPipeScript :=
    Local ← SelectSedPipes
    for i ∈ 1 + MoveOutletDown .. N_FiEntrancePipes + MoveOutletDown
        OutletPipe ← PipeSUBF(SedOutletVertPipe_Origin(i), L_SedOutletVertPipe, [0; 270]*deg, ND_FiEntrancePipe, PS_Default, ["SedTankCon"])
        Local ← stack(Local, OutletPipe)
    Local ← stack(Local, SedPipeFrz)
    return Local
SedOutletHorizPipeScript :=
    Local ← SelectSedPipes
    for i ∈ 1 + MoveOutletDown .. N_FiEntrancePipes + MoveOutletDown
        OutletPipe ← PipeSUBF(SedOutletHorizPipe_Origin(i), SedOutletElbow_Origin(i)[0] - ElbowRadius(ND_FiEntrancePipe) - (Plant_Origin[0] - T_PlantWall - L_Sed + CouplingLength(ND_FiEntrancePipe) - SocketDepth(ND_FiEntrancePipe)), [0; 0]*deg, ND_FiEntrancePipe, PS_Default, ["SedTankCon"])
        Local ← stack(Local, OutletPipe)
    Local ← stack(Local, SedPipeFrz)
    return Local
SedOutletScript := stack(SedOutletCoupling1Script, SedOutletElbowScript, SedOutletCoupling2Script, SedOutletVertPipeScript, SedOutletHorizPipeScript)
# Inlet Channel Plumbing and Concrete completed by st587 7/22/14
# Array Inlet Channel
InletFloorHeight :=
    (H_SedWeirInlet - H_PlantFreeboard)/(N_SedTanks - 1) if N_SedTanks > 1
    0 otherwise
InletHeight :=
    dZ ← InletFloorHeight
    i ← 1
    while i ≤ N_SedTanks
        Height ← stack(Height, (N_SedTanks - i)*dZ)
        i ← i + 1
    return Height
# InletHeight determines the extra height above the original floor of the inlet channel the
# plumbing and concrete should be for each sed tank.
SedManifoldSpace := (W_Sed - 2*ConRadius(ND_SedManifold) - 2*S_Fitting)/2 = 0.365131 m
# The spaces between the Manifold and Hopper Viewer Pipes are used to make inclines.
# The space available on both sides of the  Sed Tank Wall are determined by the type of pipe closest to it. If the closest pipe is a manifold pipe, the SedManifoldSpace would be the space available.
SedHopperViewerSpace := SedManifoldSpace - 2*S_Fitting - 2*ConRadius(ND_SedHopperViewer) = 0.196869 m
InletOrigin := [
    Plant_Origin[0] - L_Sed + W_SedInletChannelPreWeir;
    Plant_Origin[1] + 2*(S_Fitting + ConRadius(ND_SedExitChannelDrain)) + T_SedWeir;
    Z_SedChannelBottom
]
InletCalculations := stack(InletFloorHeight, InletHeight, SedManifoldSpace, SedHopperViewerSpace)
SelectSedCon := SelectLayer("SedTankCon")
FreezeSedTank := FreezeLayer("SedTankCon")
AngleInletFloor :=
    local ← SelectSedCon
    dZ ← InletFloorHeight
    HeightVector ← InletHeight
    BlockOrigin ← InletOrigin
    BlockFarCorner ← [
        BlockOrigin[0] - W_SedInletChannelPreWeir;
        Plant_Origin[1] + (-W_SedDiffuserOutlet/2) + outerradius(ND_SedJetReverser) + W_Sed/2 - T_SedDiffuserWall - S_FromSedWall + ConRadius(ND_SedManifold) + T_SedWallDivider + SedManifoldSpace + 4*S_Fitting + 2*ConRadius(ND_SedHopperViewer);
        (BlockOrigin[2] + HeightVector[1])
    ]
    Block ← BoxF(BlockOrigin, BlockFarCorner, [0; 0; 0]*deg)
    local ← stack(local, Block)
    NumTanks ← 2
    while NumTanks ≤ (N_SedTanks - 1)
        BlockOrigin ← BlockFarCorner + [W_SedInletChannelPreWeir; 0 m; -HeightVector[NumTanks - 1]]
        BlockFarCorner ← BlockOrigin + [
            -W_SedInletChannelPreWeir;
            4*S_Fitting + 2*ConRadius(ND_SedManifold) + T_SedWallDivider + SedManifoldSpace + SedHopperViewerSpace + 2*ConRadius(ND_SedHopperViewer);
            HeightVector[NumTanks]
        ]
        Block ← BoxF(BlockOrigin, BlockFarCorner, [0; 0; 0]*deg)
        local ← stack(local, Block)
        NumTanks ← NumTanks + 1
    local ← stack(local, FreezeSedTank)
    WedgeOrigin ← [
        InletOrigin[0];
        Plant_Origin[1] + (-W_SedDiffuserOutlet/2) + outerradius(ND_SedJetReverser) + W_Sed/2 - T_SedDiffuserWall - S_FromSedWall + ConRadius(ND_SedManifold) + T_SedWallDivider + SedManifoldSpace + 4*S_Fitting + 2*ConRadius(ND_SedHopperViewer);
        InletOrigin[2] + HeightVector[1]
    ]
    WedgeFarCorner ← WedgeOrigin + [-T_SedWallDivider - 2*SedHopperViewerSpace; -W_SedInletChannelPreWeir; dZ]
    Wedge ← WedgeF(WedgeOrigin, WedgeFarCorner, [-90; 0; 180]*deg)
    local ← stack(local, Wedge)
    WedgeOrigin ← WedgeOrigin + [
        0 m;
        4*S_Fitting + 2*ConRadius(ND_SedHopperViewer) + 2*ConRadius(ND_SedManifold) + SedHopperViewerSpace + T_SedWallDivider + SedManifoldSpace;
        -dZ
    ]
    WedgeFarCorner ← WedgeOrigin + [-T_SedWallDivider - SedManifoldSpace - SedHopperViewerSpace; -W_SedInletChannelPreWeir; dZ]
    Wedge ← WedgeF(WedgeOrigin, WedgeFarCorner, [-90; 0; 180]*deg)
    local ← stack(local, Wedge)
    NumTanks ← 3
    while NumTanks ≤ (N_SedTanks - 1)
        WedgeOrigin ← WedgeOrigin + [
            0 m;
            4*S_Fitting + 2*ConRadius(ND_SedHopperViewer) + 2*ConRadius(ND_SedManifold) + SedHopperViewerSpace + T_SedWallDivider + SedManifoldSpace;
            -dZ
        ]
        WedgeFarCorner ← WedgeOrigin + [-T_SedWallDivider - SedManifoldSpace - SedHopperViewerSpace; -W_SedInletChannelPreWeir; dZ]
        Wedge ← WedgeF(WedgeOrigin, WedgeFarCorner, [-90; 0; 180]*deg)
        local ← stack(local, Wedge)
        NumTanks ← NumTanks + 1
    local ← stack(local, GroupDelete)
    SubtractWedge ← SubtractF(["SedTankCon"], "DeleteMe")
    local ← stack(local, SubtractWedge)
    return local
SelectSedFittings == SelectLayer("SedFittingPlu")
SedFittingFrz == FreezeLayer("SedFittingPlu")
SedManVertCoupling_Origin := [
    Plant_Origin[0] - L_Sed + W_SedInletChannelPreWeir - S_Fitting - ConRadius(ND_SedManifold);
    SedManPipe_Origin[1];
    Z_SedChannelBottom - SocketDepth(ND_SedManifold)
]
SedManVertPipe_Origin := [0 m; 0 m; -CouplingLength(ND_SedManifold) + 2*SocketDepth(ND_SedManifold)] + SedManVertCoupling_Origin
X_SedManStub := Plant_Origin[0] - L_Sed + W_SedInletChannelPreWeir - S_Fitting - ConRadius(ND_SedManifold)
L_SedManVertPipe := SedManVertPipe_Origin[2] - SedManElbow_Origin[2] - ElbowRadius(ND_SedManifold)  # fixed 8/5/14
SedManStopper == PipeF([X_SedManStub; SedManPipe_Origin[1]; Z_SedChannelBottom - SocketDepth(ND_SedManifold)], H_SedInletChannel + SocketDepth(ND_SedManifold), [0; 90]*deg, ND_SedManifold, PS_Default)
ElevateCoupling :=
    local ← SelectSedFittings
    dZ ← InletFloorHeight
    HeightVector ← InletHeight
    CouplingOrigin ← SedManVertCoupling_Origin + [0 m; 0 m; HeightVector[1]]
    Coupling1 ← CouplingSUBF(CouplingOrigin, [0; 270]*deg, ND_SedManifold, PS_Default, ["SedTankCon"])
    local ← stack(local, Coupling1)
    NumPipes ← 2
    while NumPipes ≤ N_SedTanks
        CouplingOrigin ← CouplingOrigin + [
            0 m;
            4*S_Fitting + 2*ConRadius(ND_SedHopperViewer) + 2*ConRadius(ND_SedManifold) + T_SedWallDivider + SedHopperViewerSpace + SedManifoldSpace;
            -dZ
        ]
        Coupling ← CouplingSUBF(CouplingOrigin, [0; 270]*deg, ND_SedManifold, PS_Default, ["SedTankCon"])
        local ← stack(local, Coupling)
        NumPipes ← NumPipes + 1
    local ← stack(local, SedFittingFrz)
    return local
SedInletPipes := layer_new("SedInletPipes", blue)
L_SedManVertPipe =  # error: This variable is undefined.
SelectSedInletPipes := SelectLayer("SedInletPipes")
SedInletPipeFrz := FreezeLayer("SedInletPipes")
.899  # or
1.12
LongerPipes :=
    local ← SedInletPipes
    dZ ← InletFloorHeight
    HeightVector ← InletHeight
    PipeOrigin ← SedManVertPipe_Origin + [0 m; 0 m; -L_SedManVertPipe]
    PipeLength ← L_SedManVertPipe + HeightVector[1]
    Pipe1 ← PipeSUBF(PipeOrigin, PipeLength, [0; 90]*deg, ND_SedManifold, PS_Default, ["SedTankCon"])
    local ← stack(local, Pipe1)
    NumPipes ← 2
    while NumPipes ≤ N_SedTanks
        PipeOrigin ← PipeOrigin + [
            0 m;
            4*S_Fitting + 2*ConRadius(ND_SedHopperViewer) + 2*ConRadius(ND_SedManifold) + T_SedWallDivider + SedHopperViewerSpace + SedManifoldSpace;
            0 m
        ]
        PipeLength ← PipeLength - dZ
        Pipe ← PipeSUBF(PipeOrigin, PipeLength, [0; 90]*deg, ND_SedManifold, PS_Default, ["SedTankCon"])
        local ← stack(local, Pipe)
        NumPipes ← NumPipes + 1
    local ← stack(local, SedInletPipeFrz)
    return local
ShorterRemovablePipes :=
    local ← SedInletRemovables
    dZ ← InletFloorHeight
    HeightVector ← InletHeight
    PipeOrigin ← SedManVertCoupling_Origin + [0 m; 0 m; HeightVector[1]]
    PipeLength ← H_SedInletChannel + SocketDepth(ND_SedManifold) - HeightVector[1]
    Pipe1 ← PipeF(PipeOrigin, PipeLength, [0; 90]*deg, ND_SedManifold, PS_Default)
    local ← stack(local, Pipe1)
    NumPipes ← 2
    while NumPipes ≤ N_SedTanks
        PipeOrigin ← PipeOrigin + [
            0 m;
            4*S_Fitting + 2*ConRadius(ND_SedHopperViewer) + 2*ConRadius(ND_SedManifold) + T_SedWallDivider + SedHopperViewerSpace + SedManifoldSpace;
            -dZ
        ]
        PipeLength ← PipeLength + dZ
        Pipe ← PipeSUBF(PipeOrigin, PipeLength, [0; 90]*deg, ND_SedManifold, PS_Default, ["SedTankCon"])
        local ← stack(local, Pipe)
        NumPipes ← NumPipes + 1
    local ← stack(local, SedInletRemovablesFrz)
    return local
H_SedInletChannel = 0.397482 m
SedHopperViewerCoupling :=
    local ← SelectSedFittings
    dZ ← InletFloorHeight
    HeightVector ← InletHeight
    CouplingOrigin ← [
        SedManVertCoupling_Origin[0];
        SedManVertCoupling_Origin[1] + ConRadius(ND_SedHopperViewer) + ConRadius(ND_SedManifold) + 2*S_Fitting;
        Z_SedChannelBottom - SocketDepth(ND_SedHopperViewer) + HeightVector[1]
    ]
    Coupling1 ← CouplingSUBF(CouplingOrigin, [0; 270]*deg, ND_SedHopperViewer, PS_Default, ["SedTankCon"])
    local ← stack(local, Coupling1)
    CouplingOrigin ← CouplingOrigin + [
        0 m;
        T_SedWallDivider + 2*SedHopperViewerSpace + 2*ConRadius(ND_SedHopperViewer) + 2*S_Fitting;
        -dZ
    ]
    Coupling2 ← CouplingSUBF(CouplingOrigin, [0; 270]*deg, ND_SedHopperViewer, PS_Default, ["SedTankCon"])
    local ← stack(local, Coupling2)
    NumPipes ← 3
    while NumPipes ≤ N_SedTanks
        CouplingOrigin ← CouplingOrigin + [0 m; W_Sed + T_SedWallDivider; -dZ]
        Coupling ← CouplingSUBF(CouplingOrigin, [0; 270]*deg, ND_SedHopperViewer, PS_Default, ["SedTankCon"])
        local ← stack(local, Coupling)
        NumPipes ← NumPipes + 1
    local ← stack(local, SedFittingFrz)
    return local
HopperViewerShorterPipes :=
    local ← SedInletRemovablesSelect
    dZ ← InletFloorHeight
    HeightVector ← InletHeight
    PipeOrigin ← [
        SedManVertCoupling_Origin[0];
        SedManVertCoupling_Origin[1] + ConRadius(ND_SedHopperViewer) + ConRadius(ND_SedManifold) + 2*S_Fitting;
        Z_SedChannelBottom - SocketDepth(ND_SedHopperViewer) + HeightVector[1]
    ]
    PipeLength ← H_SedInletChannel + SocketDepth(ND_SedHopperViewer) - HeightVector[1]
    Pipe1 ← PipeF(PipeOrigin, PipeLength, [0; 90]*deg, ND_SedHopperViewer, PS_Default)
    local ← stack(local, Pipe1)
    PipeOrigin ← PipeOrigin + [
        0 m;
        T_SedWallDivider + 2*SedHopperViewerSpace + 2*ConRadius(ND_SedHopperViewer) + 2*S_Fitting;
        -dZ
    ]
    PipeLength ← PipeLength + dZ
    Pipe2 ← PipeF(PipeOrigin, PipeLength, [0; 90]*deg, ND_SedHopperViewer, PS_Default)
    local ← stack(local, Pipe2)
    NumPipes ← 3
    while NumPipes ≤ N_SedTanks
        PipeOrigin ← PipeOrigin + [0 m; W_Sed + T_SedWallDivider; -dZ]
        PipeLength ← PipeLength + dZ
        Pipe ← PipeSUBF(PipeOrigin, PipeLength, [0; 90]*deg, ND_SedHopperViewer, PS_Default, ["SedTankCon"])
        local ← stack(local, Pipe)
        NumPipes ← NumPipes + 1
    local ← stack(local, SedInletRemovablesFrz)
    return local
HopperViewerLowerPipes :=
    local ← SelectSedInletPipes
    dZ ← InletFloorHeight
    HeightVector ← InletHeight
    PipeOrigin ← [
        SedManVertCoupling_Origin[0];
        SedManVertCoupling_Origin[1] + ConRadius(ND_SedHopperViewer) + ConRadius(ND_SedManifold) + 2*S_Fitting;
        Z_SedChannelBottom - SocketDepth(ND_SedHopperViewer) + HeightVector[1] - CouplingLength(ND_SedHopperViewer) + 2*SocketDepth(ND_SedHopperViewer)
    ]
    PipeLength ← T_ChannelWall - CouplingLength(ND_SedHopperViewer) + SocketDepth(ND_SedHopperViewer) + HeightVector[1]
    Pipe1 ← PipeF(PipeOrigin, PipeLength, [0; 270]*deg, ND_SedHopperViewer, PS_Default)
    local ← stack(local, Pipe1)
    PipeOrigin ← PipeOrigin + [
        0 m;
        T_SedWallDivider + 2*SedHopperViewerSpace + 2*ConRadius(ND_SedHopperViewer) + 2*S_Fitting;
        -dZ
    ]
    PipeLength ← PipeLength - dZ
    Pipe2 ← PipeF(PipeOrigin, PipeLength, [0; 270]*deg, ND_SedHopperViewer, PS_Default)
    local ← stack(local, Pipe2)
    NumPipes ← 3
    while NumPipes ≤ N_SedTanks
        PipeOrigin ← PipeOrigin + [0 m; W_Sed + T_SedWallDivider; -dZ]
        PipeLength ← PipeLength - dZ
        Pipe ← PipeSUBF(PipeOrigin, PipeLength, [0; 270]*deg, ND_SedHopperViewer, PS_Default, ["SedTankCon"])
        local ← stack(local, Pipe)
        NumPipes ← NumPipes + 1
    local ← stack(local, SedInletPipeFrz)
    return local
SedInletChannelScript := stack(AngleInletFloor, ElevateCoupling, LongerPipes, ShorterRemovablePipes, SedHopperViewerCoupling, HopperViewerShorterPipes, HopperViewerLowerPipes)
# Origins and Dimensions
H_SkimmerToSurface := (HW_Sed - Z_SedLaunder - outerradius(ND_SedLaunder))/2 = 5.07061 cm
SedSkimmerCoupling0_Origin := [
    Plant_Origin[0] - L_Sed - T_PlantWall + SocketDepth(ND_SedSkimmer);
    Plant_Origin[1] + W_Sed/2 - ConRadius(ND_SedLaunder) - S_Fitting - ConRadius(ND_SedSkimmer);
    Z_SedChannelBottom - T_ChannelWall - S_Fitting - ConRadius(ND_SedSkimmer)
]
SedSkimmerCap0_Origin := [
    Plant_Origin[0] - L_Sed + W_SedExitChannel + W_SedInletChannel + T_SedWeir + T_ChannelWall + CapDiameter(ND_SedSkimmer)/2;
    SedSkimmerCoupling0_Origin[1];
    Plant_Origin[2] + HW_Sed - H_SkimmerToSurface
]
SedSkimmerHorizPipe0_Origin := [
    SedSkimmerCap0_Origin[0] - ElbowRadius(ND_SedSkimmer);
    SedSkimmerCoupling0_Origin[1];
    SedSkimmerCoupling0_Origin[2]
] = [-4.4451; 0.357194; 0.977654] m
SedSkimmerElbow0_Origin := SedSkimmerHorizPipe0_Origin + [ElbowRadius(ND_SedSkimmer); 0; ElbowRadius(ND_SedSkimmer)]
SedSkimmerVertPipe0_Origin := SedSkimmerCap0_Origin
# Skimmer Fitting 1
SedSkimmerCap0 := CapF(SedSkimmerCap0_Origin, [0; -90]*deg, ND_SedSkimmer)
SedSkimmerElbow0 := ElbowSUBF(SedSkimmerElbow0_Origin, [0; 0; 270]*deg, ND_SedSkimmer, PS_Default, ["SedModLamella"])
SedSkimmerCoupling0 := CouplingSUBF(SedSkimmerCoupling0_Origin, [0; 0; 90]*deg, ND_SedSkimmer, PS_Default, ["SedTankCon"])
SedSkimmerFittingScript0 := stack(SedInletRemovablesSelect, SedSkimmerCap0, SedInletRemovablesFrz, SelectSedFittings, SedSkimmerElbow0, SedSkimmerCoupling0, SedFittingFrz)
# Skimmer Pipe 1
SedSkimmerHorizPipe0 := PipeSUBF(SedSkimmerHorizPipe0_Origin, W_SedInletChannel + W_SedExitChannel + T_SedWeir + T_ChannelWall + T_PlantWall - CouplingLength(ND_SedSkimmer) + ConRadius(ND_SedSkimmer) + SocketDepth(ND_SedSkimmer) - ElbowRadius(ND_SedSkimmer), [0; 0]*deg, ND_SedSkimmer, PS_Default, ["SedTankCon"])
SedSkimmerVertPipe0 := PipeSUBF(SedSkimmerVertPipe0_Origin, SedSkimmerVertPipe0_Origin[2] - SedSkimmerElbow0_Origin[2], [0; -90]*deg, ND_SedSkimmer, PS_Default, ["SedModLamella"])
SedSkimmerPipeScript0 := stack(SelectSedPipes, SedSkimmerHorizPipe0, SedSkimmerVertPipe0, SedPipeFrz)
SedSkimmerCoupling1_Origin := [
    Plant_Origin[0] - L_Sed - T_PlantWall + SocketDepth(ND_SedSkimmer);
    Plant_Origin[1] + W_Sed/2 - ConRadius(ND_SedLaunder) - 4*S_Fitting - ConRadius(ND_SedSkimmer) + (W_Sed + T_SedWallDivider);
    Z_SedChannelBottom - T_ChannelWall - S_Fitting - ConRadius(ND_SedSkimmer)
]
SedSkimmerCap1_Origin := [
    Plant_Origin[0] - L_Sed + W_SedExitChannel + W_SedInletChannel + T_SedWeir + T_ChannelWall + CapDiameter(ND_SedSkimmer)/2;
    SedSkimmerCoupling1_Origin[1];
    Plant_Origin[2] + HW_Sed - H_SkimmerToSurface
]
SedSkimmerHorizPipe1_Origin := [
    SedSkimmerCap1_Origin[0] - ElbowRadius(ND_SedSkimmer);
    SedSkimmerCoupling1_Origin[1];
    SedSkimmerCoupling1_Origin[2]
] = [-4.4451; 1.42399; 0.977654] m
SedSkimmerElbow1_Origin := SedSkimmerHorizPipe1_Origin + [ElbowRadius(ND_SedSkimmer); 0; ElbowRadius(ND_SedSkimmer)]
SedSkimmerVertPipe1_Origin := SedSkimmerCap1_Origin
# Skimmer Fittings
SedSkimmerFittingScript :=
    local ← SedInletRemovablesSelect
    NumTanks ← 3
    Origin ← SedSkimmerCap1_Origin
    SedSkimmerCap ← CapF(Origin, [0; -90]*deg, ND_SedSkimmer)
    while NumTanks ≤ N_SedTanks
        Origin ← Origin + [0 m; W_Sed + T_SedWallDivider; 0 m]
        SedSkimmerCap ← CapF(Origin, [0; -90]*deg, ND_SedSkimmer)
        local ← stack(local, SedSkimmerCap)
        NumTanks ← NumTanks + 1
    local ← stack(local, SedInletRemovablesFrz, SelectSedFittings)
    Origin ← SedSkimmerElbow1_Origin
    SedSkimmerElbow ← ElbowSUBF(Origin, [0; 0; 270]*deg, ND_SedSkimmer, PS_Default, ["SedModLamella"])
    local ← stack(local, SedSkimmerElbow)
    NumTanks ← 3
    while NumTanks ≤ N_SedTanks
        Origin ← Origin + [0 m; W_Sed + T_SedWallDivider; 0 m]
        SedSkimmerElbow ← ElbowSUBF(Origin, [0; 0; 270]*deg, ND_SedSkimmer, PS_Default, ["SedModLamella"])
        local ← stack(local, SedSkimmerElbow)
        NumTanks ← NumTanks + 1
    NumTanks ← 3
    Origin ← SedSkimmerCoupling1_Origin
    SedSkimmerCoupling ← CouplingSUBF(SedSkimmerCoupling1_Origin, [0; 0; 90]*deg, ND_SedSkimmer, PS_Default, ["SedTankCon"])
    local ← stack(local, SedSkimmerCoupling)
    while NumTanks ≤ N_SedTanks
        Origin ← Origin + [0 m; W_Sed + T_SedWallDivider; 0 m]
        SedSkimmerCoupling ← CouplingSUBF(Origin, [0; 0; 90]*deg, ND_SedSkimmer, PS_Default, ["SedTankCon"])
        local ← stack(local, SedSkimmerCoupling)
        NumTanks ← NumTanks + 1
    local ← stack(local, SedFittingFrz)
    return local
# Skimmer Pipes
SedSkimmerPipesLayer := layer_new("SedSkimmerPipes", blue)
SelectSedSkimmerPipes := SelectLayer("SedSkimmerPipes")
SedSkimmerPipeFrz := FreezeLayer("SedSkimmerPipes")
SedSkimmerPipeScript :=
    local ← SedSkimmerPipesLayer
    Origin ← SedSkimmerHorizPipe1_Origin
    SedSkimmerHorizPipe ← PipeSUBF(SedSkimmerHorizPipe1_Origin, W_SedInletChannel + W_SedExitChannel + T_SedWeir + T_ChannelWall + T_PlantWall - CouplingLength(ND_SedSkimmer) + ConRadius(ND_SedSkimmer) + SocketDepth(ND_SedSkimmer) - ElbowRadius(ND_SedSkimmer), [0; 0]*deg, ND_SedSkimmer, PS_Default, ["SedTankCon"])
    local ← stack(local, SedSkimmerHorizPipe)
    NumTanks ← 3
    while NumTanks ≤ N_SedTanks
        Origin ← Origin + [0 m; W_Sed + T_SedWallDivider; 0 m]
        SedSkimmerHorizPipe ← PipeSUBF(Origin, W_SedInletChannel + W_SedExitChannel + T_SedWeir + T_ChannelWall + T_PlantWall - CouplingLength(ND_SedSkimmer) + ConRadius(ND_SedSkimmer) + SocketDepth(ND_SedSkimmer) - ElbowRadius(ND_SedSkimmer), [0; 0]*deg, ND_SedSkimmer, PS_Default, ["SedTankCon"])
        local ← stack(local, SedSkimmerHorizPipe)
        NumTanks ← NumTanks + 1
    Origin ← SedSkimmerVertPipe1_Origin
    SedSkimmerVertPipe ← PipeSUBF(SedSkimmerVertPipe1_Origin, SedSkimmerVertPipe1_Origin[2] - SedSkimmerElbow1_Origin[2], [0; -90]*deg, ND_SedSkimmer, PS_Default, ["SedModLamella"])
    local ← stack(local, SedSkimmerVertPipe)
    NumTanks ← 3
    while NumTanks ≤ N_SedTanks
        Origin ← Origin + [0 m; W_Sed + T_SedWallDivider; 0 m]
        SedSkimmerVertPipe ← PipeSUBF(Origin, SedSkimmerVertPipe1_Origin[2] - SedSkimmerElbow1_Origin[2], [0; -90]*deg, ND_SedSkimmer, PS_Default, ["SedModLamella"])
        local ← stack(local, SedSkimmerVertPipe)
        NumTanks ← NumTanks + 1
    local ← stack(local, SedSkimmerPipeFrz)
    return local
SedSkimmerScript := stack(SedSkimmerFittingScript0, SedSkimmerPipeScript0, SedSkimmerFittingScript, SedSkimmerPipeScript)
# Add Water Levels
SedWaterLayer := layer_new("SedWater", blue2)
SedWaterBox := BoxF(Plant_Origin, [-L_SedUpflow; W_Sed; HW_Sed] + Plant_Origin, [0; 0; 0]*deg)
SedIChannelWater := BoxF([Plant_Origin[0] - L_Sed; Plant_Origin[1]; Z_SedChannelBottom], [Plant_Origin[0] - L_Sed; Plant_Origin[1]; Z_SedChannelBottom] + [W_SedInletChannelPreWeir + T_SedWeir + W_SedInletChannelPostWeir; W_Sed; HW_SedInletChannel], [0; 0; 0]*deg)
SedEChannelWater := BoxF([
    Plant_Origin[0] - L_Sed + W_SedInletChannel + 2*T_SedWeir + W_SedExitChannelPostWeir;
    Plant_Origin[1];
    Z_SedChannelBottom
], [
    Plant_Origin[0] - L_Sed + W_SedInletChannel + T_SedWeir + W_SedExitChannel;
    Plant_Origin[1] + W_Sed;
    Z_SedChannelBottom + HW_SedExitChannel
], [0; 0; 0]*deg)
SedWaterFrz := FreezeLayer("SedWater")
SedWaterScript := stack(SedWaterLayer, SedWaterBox, SedIChannelWater, SedEChannelWater, SedWaterFrz)
ThawAll := ThawMultiple(["Sed*"])
MirrorDistance :=
    (Floc_Origin[0] - L_Floc - W_TrainWalkway/2 - T_PlantWall) if Mod == 0
    (Plant_Origin[0] - L_Sed - W_TrainWalkway - 2*T_PlantWall) otherwise
MirrorSedTanks := Mirror3dAll("yz", [MirrorDistance; 0 m], "n")
FreezeAll := FreezeMultiple(["Sed*"])
AC_SedTankWater := stack(SedConScript, SedDrainCoverScript, SedManifoldScript, SedLaunderScript, SedHopperDrainScript, SedSludgeDrainScript, SedLamellaScript, CompleteSedTank, SedTankArrayScript, SedDiffuserScript, FinishSedChannelScript, SedInletDrainScript, SedOutletScript, SedInletChannelScript, SedSkimmerScript, SedWaterScript)
AC_SedTank :=
    stack(SedConScript, SedDrainCoverScript, SedManifoldScript, SedLaunderScript, SedHopperDrainScript, SedSludgeDrainScript, SedLamellaScript, CompleteSedTank, SedTankArrayScript, SedDiffuserScript, FinishSedChannelScript, SedInletDrainScript, SedOutletScript, SedExitDrainScript, SedInletChannelScript, SedSkimmerScript) if EN_DoubleTrain == 0
    stack(SedConScript, SedDrainCoverScript, SedManifoldScript, SedLaunderScript, SedHopperDrainScript, SedSludgeDrainScript, SedLamellaScript, CompleteSedTank, SedTankArrayScript, SedDiffuserScript, FinishSedChannelScript, SedInletDrainScript, SedOutletScript, SedExitDrainScript, SedInletChannelScript, SedSkimmerScript, ThawAll, MirrorSedTanks, FreezeAll) otherwise
AC_SedTankTest := stack(SedConScript, SedDrainCoverScript, SedManifoldScript, SedLaunderScript, SedHopperDrainScript, SedSludgeDrainScript, SedLamellaScript, CompleteSedTank, SedTankArrayScript, SedDiffuserScript, FinishSedChannelScript, SedInletDrainScript, SedOutletScript, SedExitDrainScript, SedInletChannelScript, SedSkimmerScript)
AC_SedTankMod := stack(SedConScript, SedDrainCoverScript, SedManifoldScript, SedLaunderScript, SedHopperDrainScript, SedSludgeDrainScript, SedLamellaScript, CompleteSedTank, SedTankArrayScript, SedDiffuserScript, FinishSedChannelScript, SedInletDrainScript, SedOutletScript, SedExitDrainScript, SedInletChannelScript, SedSkimmerScript)
