# Sedimentation Tank Drawing
Q_Plant := 50*L/s
# [reference: EtFlocSedFi.xmcd]
Mod := 0
# Sedimentation Tank Concrete (excluding lamella support ledge)
# Side Slopes and Launder Support Ledge
SedTankLayer := layer_new("SedTankCon", grey)
SelectSedCon := SelectLayer("SedTankCon")
# Draw as a channel so that it can be arrayed. All side walls at end.
DrawSedTank := ChannelDrawingPlus(Plant_Origin + [-L_Sed; W_SedBay + T_PlantWall; 0 m - DropSedBottom], [W_SedBay + 2*T_SedWallDivider; L_Sed; H_Sed + DropSedBottom], T_PlantWall, T_SedTankBottomSlab + ConRadius(ND_SedSludgePipe), [270; 0; 0]*deg)
# DropSedBottom subtracted from every term in this variable. 7/2/2014
SedSlopePolyline := Pline3D([
    [Plant_Origin[0]; Plant_Origin[1] + W_SedBay; Plant_Origin[2]] + [0 m; T_ConcreteMin; 0 m - DropSedBottom];
    [Plant_Origin[0]; Plant_Origin[1] + W_SedBay; Plant_Origin[2]] + [Plant_Origin[0]; -W_SedBay/2 + W_SedSludge/2; 0 m - DropSedBottom];
    [Plant_Origin[0]; Plant_Origin[1] + W_SedBay; Plant_Origin[2]] + [0 m; -W_SedBay/2 + W_SedSludge/2; H_SedSludge - DropSedBottom];
    [Plant_Origin[0]; Plant_Origin[1] + W_SedBay; Plant_Origin[2]] + [0 m; -W_SedBay/2 + W_SedSludge/2 + T_SedDrainCoverLedge; H_SedSludge - DropSedBottom];
    [Plant_Origin[0]; Plant_Origin[1] + W_SedBay; Plant_Origin[2]] + [
        0 m;
        -W_SedBay/2 + W_SedSludge/2 + T_SedDrainCoverLedge;
        H_SedSludge + H_SedDrainCoverTotal - DropSedBottom
    ];
    [Plant_Origin[0]; Plant_Origin[1] + W_SedBay - T_ConcreteMin; Plant_Origin[2]] + [0 m; 0 m; Z_SedSideSlopes - (T_ConcreteMin*tan(AN_SedSlope)) - DropSedBottom];
    [Plant_Origin[0]; Plant_Origin[1] + W_SedBay - T_ConcreteMin; Z_SedLamellaBottom];
    [Plant_Origin[0]; Plant_Origin[1] + W_SedBay; Plant_Origin[2]] + [0 m; T_ConcreteMin; Z_SedLamellaBottom];
    [Plant_Origin[0]; Plant_Origin[1] + W_SedBay; Plant_Origin[2]] + [0 m; T_ConcreteMin; 0 m - DropSedBottom]
])
# Nore : Drop Sed bottom is NOR subtracted from the Z.SedLamellaBottom pieces because the lamella stays at the same spot even when the bottom drops. mrf222
ExtrudeSedSlopes := ExtrudeLast(-L_Sed)
MirrorSedSlopes := Mirror3dLast("zx", [Plant_Origin[0]; Plant_Origin[1] + W_SedBay - W_SedBay/2], "n")
SedLaunderLedge := BoxF([
    0;
    W_SedBay - 1/2*W_SedBay + ConRadius(ND_SedLaunder);
    Z_SedLaunder - ConRadius(ND_SedLaunder) - DropSedBottom
] + Plant_Origin, [
    -2*SocketDepth(ND_SedLaunder);
    W_SedBay - 1/2*W_SedBay - ConRadius(ND_SedLaunder);
    Z_SedLaunder - ConRadius(ND_SedLaunder) - T_ConcreteMin + DropSedBottom
] + Plant_Origin, [0; 0; 0]*deg)
Funk := layer_new("Funk", purple)
FunkOut := FreezeLayer("Funk")
SedFlocWeirLedge := BoxF([
    -L_Sed + L_SedHopper + (W_SedInletChannelPreWeir + T_PlantWall)*(EN_InletChannelGeom == Inlet_FullDepth);
    Plant_Origin[1] + W_SedBay;
    H_SedSludge - DropSedBottom
] + Plant_Origin, [
    -L_Sed + L_SedHopper + (W_SedInletChannelPreWeir + T_PlantWall)*(EN_InletChannelGeom == Inlet_FullDepth) - T_SedWeir;
    Plant_Origin[1];
    Z_SedManifoldPipe
] + Plant_Origin, [0; 0; 0]*deg)
# Does this change anything?
SedTankLayer2 := layer_new("SedTankCon2", grey)
FreezeSedTank2 := FreezeLayer("SedTankCon2")
DrainPipeBox := BoxF([
    Plant_Origin[0] - L_Sed + W_SedInletChannelPreWeir + T_SedWeir;
    Plant_Origin[1] + 2*S_Fitting + 2*ConRadius(ND_SedInletChannelDrain);
    Plant_Origin[2] + Z_SedChannelBottom - CouplingLength(ND_SedInletChannelDrain) + 2*SocketDepth(ND_SedInletChannelDrain) - DropSedBottom
], [Plant_Origin[0] - L_Sed; Plant_Origin[1]; Plant_Origin[2] + ConRadius(ND_SedInletChannelDrain)], [0; 0; 0]*deg)
SedSlopeLedgeScript := stack(SedTankLayer, DrawSedTank, SedSlopePolyline, ExtrudeSedSlopes, MirrorSedSlopes, SedLaunderLedge, SedFlocWeirLedge)
# Inlet and Exit Channels
ChannelVertBox := BoxF([
    -L_Sed + W_SedInletChannel + W_SedExitChannel + T_SedWeir;
    W_SedBay + T_PlantWall;
    Z_SedChannelBottom
] + Plant_Origin, [-L_Sed + W_SedInletChannel + W_SedExitChannel + T_SedWeir + T_ChannelWall; -T_PlantWall; H_Sed] + Plant_Origin, [0; 0; 0]*deg)
ChannelHorizBox := BoxF([-L_Sed; W_SedBay + T_PlantWall; Z_SedChannelBottom] + Plant_Origin, [
    -L_Sed + W_SedExitChannel + T_SedWeir + W_SedInletChannel + T_ChannelWall;
    -T_PlantWall;
    Z_SedChannelBottom - T_ChannelWall
] + Plant_Origin, [0; 0; 0]*deg)
SedFlocWeirBox := BoxF([Plant_Origin[0] - L_SedUpflow - T_ConcreteMin; Plant_Origin[1] - T_ConcreteMin; Z_SedFlocWeir], [Plant_Origin[0] - L_SedUpflow; Plant_Origin[1] + T_ConcreteMin + W_SedBay; Z_SedManifoldPipe], [0; 0; 0]*deg)
SedChannelScript := stack(ChannelVertBox, ChannelHorizBox, SedFlocWeirBox)
# Floc Hopper Front and Back Slopes
SedHopperPeak := [
    [Plant_Origin[0] - L_Sed; Plant_Origin[1]; Plant_Origin[2] - DropSedBottom];
    [Plant_Origin[0] - L_Sed + L_SedHopper; Plant_Origin[1]; Plant_Origin[2] - DropSedBottom];
    [Plant_Origin[0] - L_Sed + L_SedHopper; Plant_Origin[1]; Z_SedManifoldPipe - DropSedBottom];
    [
        Plant_Origin[0] - L_Sed + L_SedHopper - T_ConcreteMin;
        Plant_Origin[1];
        Z_SedManifoldPipe - DropSedBottom
    ];
    [X_SedHopperBottom; Plant_Origin[1]; Z_SedHopperIntersect - DropSedBottom];
    [Plant_Origin[0] - L_Sed; Plant_Origin[1]; Z_SedHopperBackSlope - DropSedBottom];
    [Plant_Origin[0] - L_Sed; Plant_Origin[1]; Plant_Origin[2] - DropSedBottom]
] = [
    [-9.15822; 0; -0.057925]; [-7.81878; 0; -0.057925]; [-7.81878; 0; 0.32549]; [-7.86878; 0; 0.32549]; [-8.29665; 0; 0.0257537]; [-9.15822; 0; 0.887323]; [-9.15822; 0; -0.057925]
] m
SedHopperFlat := [
    [Plant_Origin[0] - L_Sed; Plant_Origin[1]; Plant_Origin[2] - DropSedBottom];
    [Plant_Origin[0] - L_Sed + L_SedHopper; Plant_Origin[1]; Plant_Origin[2] - DropSedBottom];
    [Plant_Origin[0] - L_Sed + L_SedHopper; Plant_Origin[1]; Z_SedManifoldPipe - DropSedBottom];
    [
        Plant_Origin[0] - L_Sed + L_SedHopper - T_ConcreteMin;
        Plant_Origin[1];
        Z_SedManifoldPipe - DropSedBottom
    ];
    [
        Plant_Origin[0] - L_Sed + L_SedHopper - T_ConcreteMin;
        Plant_Origin[1];
        Z_SedHopperFrontSlope - DropSedBottom
    ];
    [
        Plant_Origin[0] - L_Sed + L_SedHopperBackSlope;
        Plant_Origin[1];
        Z_SedHopperIntersect - DropSedBottom
    ];
    [Plant_Origin[0] - L_Sed; Plant_Origin[1]; Z_SedHopperBackSlope - DropSedBottom];
    [Plant_Origin[0] - L_Sed; Plant_Origin[1]; Plant_Origin[2] - DropSedBottom]
] = [
    [-9.15822; 0; -0.057925]; [-7.81878; 0; -0.057925]; [-7.81878; 0; 0.32549]; [-7.86878; 0; 0.32549]; [-7.86878; 0; 0.0257537]; [-8.29665; 0; 0.0257537]; [-9.15822; 0; 0.887323]; [-9.15822; 0; -0.057925]
] m
# DropSedBottom was subtracted from all of this!
SedHopperPlineMatrix :=
    SedHopperFlat if L_SedHopperFrontSlopeMax + L_SedHopperBackSlope < L_SedHopper - T_ConcreteMin
    SedHopperPeak otherwise
SedHopperPline := Pline3D(SedHopperPlineMatrix)
ExtrudeSedHopper := ExtrudeLast(W_SedBay)
SedHopperScript := stack(SedHopperPline, ExtrudeSedHopper)
FreezeSedTank := FreezeLayer("SedTankCon")
SedConScript := stack(SedSlopeLedgeScript, SedChannelScript, SedHopperScript, FreezeSedTank, SedTankLayer2, DrainPipeBox, FreezeSedTank2)
# Sludge Drain Cover
SedDrainCoverLayer := layer_new("SedDrainCoverCon", ltgrey)
SedDrainCoverPline := Pline3D([
    [
        Plant_Origin[0];
        Plant_Origin[1] + W_SedBay - (W_SedBay + W_SedDrainCover)/2;
        Plant_Origin[2] + H_SedSludge - DropSedBottom
    ];
    [
        Plant_Origin[0];
        Plant_Origin[1] + W_SedBay - (W_SedBay + W_SedDrainCover)/2;
        Plant_Origin[2] + H_SedSludge + H_SedDrainCoverTotal - DropSedBottom
    ];
    [
        Plant_Origin[0];
        Plant_Origin[1] + W_SedBay - W_SedBay/2 - outerradius(ND_SedJetReverser);
        T_ConcreteMin + outerradius(ND_SedJetReverser) + H_SedSludge - DropSedBottom
    ];
    [
        Plant_Origin[0];
        Plant_Origin[1] + W_SedBay - W_SedBay/2 + outerradius(ND_SedJetReverser);
        T_ConcreteMin + outerradius(ND_SedJetReverser) + H_SedSludge - DropSedBottom
    ];
    [
        Plant_Origin[0];
        Plant_Origin[1] + W_SedBay - (W_SedBay - W_SedDrainCover)/2;
        Plant_Origin[2] + H_SedSludge + H_SedDrainCoverTotal - DropSedBottom
    ];
    [
        Plant_Origin[0];
        Plant_Origin[1] + W_SedBay - (W_SedBay - W_SedDrainCover)/2;
        Plant_Origin[2] + H_SedSludge - DropSedBottom
    ];
    [
        Plant_Origin[0];
        Plant_Origin[1] + W_SedBay - (W_SedBay + W_SedDrainCover)/2;
        Plant_Origin[2] + H_SedSludge - DropSedBottom
    ]
])
-L_SedUpflow = -7.81878 m
ExtrudeSedDrainCover := ExtrudeLast(-L_SedUpflow)
SedDrainCoverBox := BoxF(Plant_Origin + [0; W_SedBay - (W_SedBay + W_SedDrainCover)/2; H_SedSludge - DropSedBottom], Plant_Origin + [0; W_SedBay - (W_SedBay + W_SedDrainCover)/2; H_SedSludge] + [-L_SedUpflow; W_SedDrainCover; H_SedDrainCoverTotal], [0; 0; 0]*deg)
FreezeSedDrainCover := FreezeLayer("SedDrainCoverCon")
SedJetRedirect := CylinderF([
    0 m;
    W_SedBay - W_SedBay/2;
    H_SedSludge - DropSedBottom + T_ConcreteMin + outerradius(ND_SedJetReverser)
] + Plant_Origin, outerradius(ND_SedJetReverser), L_SedUpflow + zc, [0; 0]*deg)
N_SedDrainCoverSegmentOrifices
SedDrainCoverOrifices := CylinderF([
    -B_SedSludgeOrifices/2;
    W_SedBay - W_SedBay/2;
    H_SedSludge - DropSedBottom + H_SedDrainCoverTotal + zc
] + Plant_Origin, D_SedSludgeOrifice/2, H_SedDrainCoverTotal + 2*zc, [0; 270]*deg)
ArraySedDrainOrifices := ArrayLast(1, N_SedSludgeOrifices, -B_SedSludgeOrifices)
GroupSedDrainCuts := GroupAll("DeleteMe")
SubtractSedDrainCuts := SubtractF(["SedDrainCoverCon"], "DeleteMe")
ThawSedDrainCover := SelectLayer("SedDrainCoverCon")
ArraySedDrainCover1 := ArrayLast(1, N_SedDrainCover, -L_SedDrainCoverSegment - S_SedDrainCoverSegment)
SedDrainCoverScript :=
    stack(SedDrainCoverLayer, SedDrainCoverBox, FreezeSedDrainCover, SedJetRedirect, SedDrainCoverOrifices, ArraySedDrainOrifices, GroupSedDrainCuts, SubtractSedDrainCuts, ThawSedDrainCover, FreezeSedDrainCover) if W_SedDrainCover == outerdiameter(ND_SedJetReverser)
    stack(SedDrainCoverLayer, SedDrainCoverPline, ExtrudeSedDrainCover, FreezeSedDrainCover, SedJetRedirect, SedDrainCoverOrifices, ArraySedDrainOrifices, GroupSedDrainCuts, SubtractSedDrainCuts, ThawSedDrainCover, FreezeSedDrainCover) otherwise
# Inlet Manifold
# Origins and Dimensions
S_FromSedWall := 1 in
SedManPipe_Origin := [
    Plant_Origin[0] - CapThickness(ND_SedManifold);
    Plant_Origin[1] + (-W_SedDiffuserOutlet/2) + outerradius(ND_SedJetReverser) + W_SedBay/2 - T_SedDiffuserWall - S_FromSedWall;
    Z_SedManifoldPipe + S_FromSedWall - DropSedBottom
]
X_SedManStub := Plant_Origin[0] - L_Sed + W_SedInletChannelPreWeir - S_Fitting - ConRadius(ND_SedManifold)
SedManElbow_Origin := SedManPipe_Origin - [L_SedManifoldPipe; 0; 0]
SedManCap_Origin := SedManPipe_Origin + [L_SedManifoldPipe; 0 m; 0 m]
SedManVertCoupling_Origin := [
    Plant_Origin[0] - L_Sed + W_SedInletChannelPreWeir - S_Fitting - ConRadius(ND_SedManifold);
    (Plant_Origin[1] + (-W_SedDiffuserOutlet/2) + outerradius(ND_SedJetReverser) + W_SedBay/2 - T_SedDiffuserWall - S_FromSedWall);
    Z_SedChannelBottom - SocketDepth(ND_SedManifold)
] = [-8.98995; 0.548355; 1.68013] m
SedManVertPipe_Origin := [0 m; 0 m; -CouplingLength(ND_SedManifold) + 2*SocketDepth(ND_SedManifold)] + SedManVertCoupling_Origin
L_SedManVertPipe := SedManVertPipe_Origin[2] - (SedManElbow_Origin[2] + ElbowRadius(ND_SedManifold))
# Manifold Pipes
SedPipeLayer := layer_new("SedPipePlu", blue)
SelectSedPipes := SelectLayer("SedPipePlu")
SedPipeFrz := FreezeLayer("SedPipePlu")
SedRemovableLayer := layer_new("SedRemovablePlu", red)
SelectSedRemovables := SelectLayer("SedRemovablePlu")
SedRemovableFrz := FreezeLayer("SedRemovablePlu")
SedManPipe := PipeSUBF(SedManPipe_Origin, L_SedManifoldPipe, [0; 0]*deg, ND_SedManifold, PS_Default, ["SedTankCon"])
SedManVertPipe := PipeSUBF(SedManVertPipe_Origin, L_SedManVertPipe, [0; 270]*deg, ND_SedManifold, PS_Default, ["SedTankCon"])
# SedManVertPipe and SedManStopper were changed and created in the inlet channel later on. These were the originals before the floor was sloped
SedManStopper := PipeF([
    X_SedManStub;
    (Plant_Origin[1] + (-W_SedDiffuserOutlet/2) + outerradius(ND_SedJetReverser) + W_SedBay/2 - T_SedDiffuserWall - S_FromSedWall);
    Z_SedChannelBottom - SocketDepth(ND_SedManifold)
], H_SedInletChannel + SocketDepth(ND_SedManifold), [0; 90]*deg, ND_SedManifold, PS_Default)
# This is what the SedManPipeScript looked like
SedManPipeScript :=
    stack(SedPipeLayer, SedManPipe, SedPipeFrz) if EN_SedChannelCoupling == 0
    stack(SedPipeLayer, SedManPipe, SedPipeFrz) otherwise
stack(SedPipeLayer, SedManPipe, SedPipeFrz, SedRemovableLayer, SedManStopper, SedRemovableFrz) if EN_SedChannelCoupling == 0
stack(SedPipeLayer, SedManPipe, SedManVertPipe, SedPipeFrz, SedRemovableLayer, SedManStopper, SedRemovableFrz) otherwise
# Manifold Feet
ND_ManFeet := 1 in
H_subtraction := ((Z_SedSideSlopes - H_SedSludge - T_ConcreteMin)*S_FromSedWall)/(W_SedBay/2 + S_FromSedWall) = 0.0297111 m
H_additional := (W_SedDiffuserOutlet/2 - 1.5*T_SedDiffuserWall + S_FromSedWall)/tan(90 deg - AN_SedSlope)
L_LongTriangleLegA := Z_SedManifoldPipe - T_ConcreteMin - H_subtraction
L_LongTriangleLeg := L_SedManifoldDiffuser + innerdiameter(ND_SedManifold, PS_Default)/2 + H_additional + S_FromSedWall
L_ShortTriangleLeg := tan(90 deg - AN_SedSlope)*L_LongTriangleLeg
L_ShortTriangleLegA := (L_LongTriangleLeg*(W_SedBay/2 - outerradius(ND_SedJetReverser) + S_FromSedWall))/(Z_SedSideSlopes - H_SedSludge - T_ConcreteMin)
S_FromManifold := L_ShortTriangleLeg*cos(90 deg - AN_SedSlope)
L_ShortFoot := S_FromManifold - outerradius(ND_SedManifold)
H_additional2 := (-3*T_SedDiffuserWall - S_FromSedWall + 2*outerradius(ND_SedJetReverser) - W_SedDiffuserOutlet/2)/tan(90 deg - AN_SedSlope)
L_LongTriangleLeg2A := Z_SedSideSlopes - H_SedSludge - T_ConcreteMin - H_subtraction
L_LongTriangleLeg2 := innerdiameter(ND_SedManifold, PS_Default)/2 + L_SedManifoldDiffuser + H_additional2 + S_FromSedWall
S_FromManifold2 := cos(AN_SedSlope)*L_LongTriangleLeg2
L_LongFoot := S_FromManifold2 - outerradius(ND_SedManifold)
Y_1 := S_FromManifold*cos(90 deg - AN_SedSlope)
Y_2 := S_FromManifold2*sin(AN_SedSlope)
Z_1 := S_FromManifold*sin(90 deg - AN_SedSlope)
Z_2 := S_FromManifold2*cos(AN_SedSlope)
ManFeetLayer := layer_new("SedModManFeet", red)
ManFeetLong_OriginPoint := [
    SedManPipe_Origin[0] + CapDiameter(ND_SedManifold)/2 - outerradius(ND_SedManifold) - CapHeight(ND_SedManifold) - ND_ManFeet;
    SedManPipe_Origin[1] - Y_2;
    SedManPipe_Origin[2] - Z_2
]
ManFeetShort_OriginPoint := [ManFeetLong_OriginPoint[0]; SedManPipe_Origin[1] + Y_1; SedManPipe_Origin[2] - Z_1]
ManFeetLong := PipeF(ManFeetLong_OriginPoint, L_LongFoot, [-AN_SedSlope; 90 deg], ND_ManFeet, PS_Default)
ManFeetShort := PipeF(ManFeetShort_OriginPoint, L_ShortFoot, [180 deg - AN_SedSlope; -90 deg], ND_ManFeet, PS_Default)
Loc_Feet := Plant_Origin[0] - L_SedUpflow + T_PlantWall + ND_ManFeet
ManFeetLayerFrz := FreezeLayer("SedModManFeet")
S_SedPipe := .25 in  # Subject to change, not specified in report
Y_3 := (outerradius(ND_SedManifold) + S_SedPipe)*sin(AN_SedSlope)
Y_4 := (outerradius(ND_SedManifold) + S_SedPipe)*cos(90 deg - AN_SedSlope)
Z_3 := (outerradius(ND_SedManifold) + S_SedPipe)*cos(AN_SedSlope)
Z_4 := (outerradius(ND_SedManifold) + S_SedPipe)*sin(90 deg - AN_SedSlope)
R_Hole := .25 in
HoleLongFoot_OriginPoint := [ManFeetLong_OriginPoint[0]; SedManPipe_Origin[1] - Y_3 + 2 in; SedManPipe_Origin[2] - Z_3 - 2 in]
HoleShortFoot_OriginPoint := [ManFeetLong_OriginPoint[0]; SedManPipe_Origin[1] + Y_4 - 2 in; SedManPipe_Origin[2] - Z_4 - 2 in]
DrawHole1 := CylinderF(HoleLongFoot_OriginPoint, R_Hole, 4 in, [180 deg - AN_SedSlope; -90 deg])
DrawHole2 := CylinderF(HoleShortFoot_OriginPoint, R_Hole, 4 in, [-AN_SedSlope; 90 deg])
SubtractHole := SubtractF(["SedModManFeet"], "DeleteMe")
# Hose Clamps:
LayerHoseClamp := layer_new("SedModHoseClamp", purple)
T_Clamp := 1/8*in
L_Clamp := .25 in
R_Clamp := outerradius(ND_SedManifold) + R_Hole + S_SedPipe
HoseClamp_Origin := [ManFeetLong_OriginPoint[0]; SedManPipe_Origin[1]; SedManPipe_Origin[2]]
HoseClampOuter := CylinderF(HoseClamp_Origin, R_Clamp + T_Clamp, L_Clamp, [0; 0]*deg)
FrzLayerHoseClamp := FreezeLayer("SedModHoseClamp")
HoseClampInner := CylinderF(HoseClamp_Origin, R_Clamp, L_Clamp, [0; 0]*deg)
SubtractInner := SubtractF(["SedModHoseClamp"], "DeleteMe")
DrawHoseClamps := stack(LayerHoseClamp, HoseClampOuter, FrzLayerHoseClamp, HoseClampInner, GroupDelete, SubtractInner, DrawHole1, DrawHole2, GroupDelete, SubtractHole)
SelectHoseClamps := SelectLayer("SedModHoseClamp")
SelectFeet := SelectLayer("SedModManFeet")
ArrayFeet := array_all(1, 2, Loc_Feet)
ManFeetScript := stack(ManFeetLayer, ManFeetLong, ManFeetShort, ManFeetLayerFrz, DrawHoseClamps, SelectHoseClamps, SelectFeet, ArrayFeet, FrzLayerHoseClamp, ManFeetLayerFrz)
# Manifold Fittings
SedFittingLayer := layer_new("SedFittingPlu", green)
SelectSedFittings := SelectLayer("SedFittingPlu")
SedFittingFrz := FreezeLayer("SedFittingPlu")
# This is currently not in use because it is created later on in the inlet channel
SedManElbow := ElbowSUBF(SedManElbow_Origin, [90; 0; 270]*deg, ND_SedManifold, PS_Default, ["SedTankCon"])
SedManVertCoupling := CouplingSUBF(SedManVertCoupling_Origin, [0; 270]*deg, ND_SedManifold, PS_Default, ["SedTankCon"])
SedManCap := CapF(SedManPipe_Origin, [0; 0; 0]*deg, ND_SedManifold)
# The stack at the end of the fitting was this
stack(SedFittingLayer, SedManCap, SedManElbow, SedManVertCoupling, SedFittingFrz) if EN_SedChannelCoupling == 1
SedManFittingScript :=
    stack(SedFittingLayer, SedManCap, SedManElbow, SedFittingFrz) if EN_SedChannelCoupling == 1
    stack(SedFittingLayer, SedManCap, SedManElbow, SedFittingFrz) otherwise
# Manifold Orifices
SedManOrifice := CylinderF([
    Plant_Origin[0] - L_Sed + L_SedHopper + L_SedDiffuserOutlet/2 + T_SedDiffuserWall + (W_SedInletChannelPreWeir + T_ChannelWall)*(EN_InletChannelGeom == Inlet_FullDepth);
    SedManPipe_Origin[1];
    SedManPipe_Origin[2]
], D_SedManifoldPort/2, ND_SedManifold, [0; 270]*deg)
ArraySedManOrifice := array_all(1, N_SedManifoldPorts, B_SedManifoldPort)
# Air Vent Holes
SedManAirVent := CylinderF([
    Plant_Origin[0] - 2*N_AirVentHoles*B_AirVentHoles;
    SedManPipe_Origin[1];
    SedManPipe_Origin[2] + outerradius(ND_SedManifold) + ND_SedManifold/4
], D_AirVentHoles/2, ND_SedManifold/2, [0; 270]*deg)
ArraySedManAirVent := array_all(1, N_AirVentHoles, B_AirVentHoles)
[
    Plant_Origin[0] - 2*N_AirVentHoles*B_AirVentHoles;
    SedManPipe_Origin[1];
    SedManPipe_Origin[2] + outerradius(ND_SedManifold) + ND_SedManifold/4
] = [-0.0508; 0.548355; 0.511227] m
SubtractFromSedPipes := SubtractF(["SedPipePlu"], "DeleteMe")
SubtractFromSedFittings := SubtractF(["SedFittingPlu"], "DeleteMe")
SedManOrificeScript := stack(SedManOrifice, ArraySedManOrifice, SedManAirVent, ArraySedManAirVent, GroupDelete, SubtractFromSedPipes, SedManOrifice, ArraySedManOrifice, SedManAirVent, ArraySedManAirVent, GroupDelete, SubtractFromSedFittings)
SedManifoldScript := stack(SedManPipeScript, SedManFittingScript, SedManOrificeScript, ManFeetScript)
# Exit Launder
# Origins and Dimensions
SedLaunderPipe_Origin :=
    if T_ChannelWall > CouplingLength(ND_SedLaunder)
        [
            Plant_Origin[0] - L_SedChannelToWall + max(0 m, 2*CouplingLength(ND_SedLaunder) - T_ChannelWall) - SocketDepth(ND_SedLaunder);
            W_SedBay - 1/2*W_SedBay + Plant_Origin[1];
            Z_SedLaunder
        ]
    otherwise
        [
            Plant_Origin[0] - L_SedChannelToWall - T_ChannelWall + CouplingLength(ND_SedLaunder) - SocketDepth(ND_SedLaunder);
            W_SedBay - 1/2*W_SedBay + Plant_Origin[1];
            Z_SedLaunder
        ]
SedLaunderCap_Origin := SedLaunderPipe_Origin + [L_SedLaunder; 0 m; 0 m]
SedLaunderCoupling1_Origin := [
    Plant_Origin[0] - L_Sed + W_SedExitChannel + W_SedInletChannel + T_SedWeir + SocketDepth(ND_SedLaunder);
    W_SedBay - 1/2*W_SedBay + Plant_Origin[1];
    Z_SedLaunder
]
SedLaunderCoupling2_Origin := [
    Plant_Origin[0] - L_SedChannelToWall + max(0 m, 2*CouplingLength(ND_SedLaunder) - T_ChannelWall) - SocketDepth(ND_SedLaunder);
    W_SedBay - 1/2*W_SedBay + Plant_Origin[1];
    Z_SedLaunder
]
SedLaunderNipple_Origin := SedLaunderCoupling1_Origin + [CouplingLength(ND_SedLaunder) - 2*SocketDepth(ND_SedLaunder); 0 m; 0 m]
# Launder Fittings
SedLaunderEndCap := CapF(SedLaunderCap_Origin, [0; 0]*deg, ND_SedLaunder)
SedLaunderPlugCap := CapF([
    Plant_Origin[0] - L_SedChannelToWall - T_ChannelWall - CapHeight(ND_SedLaunder) + CapThickness(ND_SedLaunder);
    W_SedBay - 1/2*W_SedBay + Plant_Origin[1];
    Z_SedLaunder
], [180; 0]*deg, ND_SedLaunder)
SedLaunderCoupling1 := CouplingSUBF(SedLaunderCoupling1_Origin, [0; 180]*deg, ND_SedLaunder, PS_Default, ["SedTankCon"])
SedLaunderCoupling2 := CouplingSUBF(SedLaunderCoupling2_Origin, [0; 0]*deg, ND_SedLaunder, PS_Default, ["SedTankCon"])
SedLaunderFittingScript :=
    stack(SelectSedFittings, SedLaunderEndCap, SedLaunderCoupling1, SedFittingFrz, SelectSedRemovables, SedLaunderPlugCap, SedRemovableFrz) if CouplingLength(ND_SedLaunder) ≥ T_ChannelWall
    stack(SelectSedFittings, SedLaunderEndCap, SedLaunderCoupling1, SedLaunderCoupling2, SedFittingFrz, SelectSedRemovables, SedLaunderPlugCap, SedRemovableFrz) otherwise
# Launder Pipes
SedLaunderPipe := PipeF(SedLaunderPipe_Origin, L_SedLaunder, [0; 180]*deg, ND_SedLaunder, PS_Default)
SedLaunderPlugNipple := PipeF([
    Plant_Origin[0] - L_SedChannelToWall - T_ChannelWall + L_SedLaunderCapExcess;
    W_SedBay - 1/2*W_SedBay + Plant_Origin[1];
    Z_SedLaunder
], CapHeight(ND_SedLaunder) - CapThickness(ND_SedLaunder) + L_SedLaunderCapExcess, [0; 0]*deg, ND_SedLaunder, PS_Default)
SedLaunderNipple := PipeSUBF(SedLaunderNipple_Origin, T_ChannelWall - 2*CouplingLength(ND_SedLaunder) + 2*SocketDepth(ND_SedLaunder), [0; 180]*deg, ND_SedLaunder, PS_Default, ["SedTankCon"])
SedLaunderPipeScript :=
    stack(SelectSedPipes, SedLaunderPipe, SedPipeFrz, SelectSedRemovables, SedLaunderPlugNipple, SedRemovableFrz) if CouplingLength(ND_SedLaunder) ≥ T_ChannelWall
    stack(SelectSedPipes, SedLaunderPipe, SedLaunderNipple, SedPipeFrz, SelectSedRemovables, SedLaunderPlugNipple, SedRemovableFrz) otherwise
# Launder Orifices
SedLaunderOrifice := CylinderF([SocketDepth(ND_SedLaunder) + 1/2*B_SedLaunderOrifices; 0 m; 0 m] + SedLaunderPipe_Origin, D_SedLaunderOrifice/2, ND_SedLaunder, [0; 90]*deg)
ArraySedLaunderOrifices := array_all(1, N_SedLaunderOrifices, B_SedLaunderOrifices)
SedLaunderOrificeScript := stack(SedLaunderOrifice, ArraySedLaunderOrifices, GroupDelete, SubtractFromSedPipes, SedLaunderOrifice, ArraySedLaunderOrifices, GroupDelete, SubtractFromSedFittings)
SedLaunderScript := stack(SedLaunderFittingScript, SedLaunderPipeScript, SedLaunderOrificeScript)
# Floc Hopper Drain
# Origins
SedHopperDrainAdapter1_Origin := Plant_Origin + [
    -L_Sed - T_PlantWall - SocketDepth(ND_SedHopperDrain);
    W_SedBay/2;
    Z_SedHopperIntersect + outerradius(ND_SedHopperDrain) - DropSedBottom
]
SedHopperDrainValve_Origin := SedHopperDrainAdapter1_Origin + [
    -MaleAdapterLength(ND_SedHopperDrain) + ValveSocket(ND_SedHopperDrain) + SocketDepth(ND_SedHopperDrain);
    0 m;
    0 m
]
SedHopperDrainAdapter2_Origin := SedHopperDrainValve_Origin + [
    ValveSocket(ND_SedHopperDrain) - ValveLength(ND_SedHopperDrain) + SocketDepth(ND_SedHopperDrain) - MaleAdapterLength(ND_SedHopperDrain);
    0 m;
    0 m
]
SedHopperDrainElbow_Origin := SedHopperDrainAdapter2_Origin + [-2*SocketDepth(ND_SedHopperDrain); 0 m; 0 m]
SedHopperDrainCoupling_Origin := SedHopperDrainAdapter1_Origin + [CouplingLength(ND_SedHopperDrain); 0 m; 0 m]
SedHopperDrainPipe_Origin := [
    X_SedHopperBottom;
    SedHopperDrainCoupling_Origin[1];
    Z_SedHopperIntersect + outerradius(ND_SedHopperDrain) - DropSedBottom
]
# Hopper Drain Pipes
SedHopperDrainNipple1 := PipeF(SedHopperDrainAdapter1_Origin + [2*SocketDepth(ND_SedHopperDrain); 0; 0], 2*SocketDepth(ND_SedHopperDrain), [0; 0]*deg, ND_SedHopperDrain, PS_Default)
SedHopperDrainNipple2 := PipeF(SedHopperDrainAdapter2_Origin, 2*SocketDepth(ND_SedHopperDrain), [0; 0]*deg, ND_SedHopperDrain, PS_Default)
L_SedHopperDrainPipe := X_SedHopperBottom - (Plant_Origin[0] - L_Sed - T_PlantWall + CouplingLength(ND_SedHopperDrain) - SocketDepth(ND_SedHopperDrain))
SedHopperDrainPipe := PipeSUBF(SedHopperDrainPipe_Origin, L_SedHopperDrainPipe, [0; 0]*deg, ND_SedHopperDrain, PS_Default, ["SedTankCon"])
SedHopperDrainPipeWedge := WedgeF([0; outerradius(ND_SedHopperDrain); outerradius(ND_SedHopperDrain)] + SedHopperDrainPipe_Origin, [
    -2*outerradius(ND_SedHopperDrain)/tan(AN_SedHopperSlope);
    -outerradius(ND_SedHopperDrain);
    -outerradius(ND_SedHopperDrain)
] + SedHopperDrainPipe_Origin, [0; 0; 0])
SubtractSedHopperDrainPipeWedge := SubtractF(["SedPipePlu"], "DeleteMe")
SedHopperDrainPipeScript := stack(SelectSedPipes, SedHopperDrainNipple1, SedHopperDrainNipple2, SedHopperDrainPipe, SedPipeFrz, SedHopperDrainPipeWedge, GroupDelete, SubtractSedHopperDrainPipeWedge)
# Hopper Drain Fittings
SedValveLayer := layer_new("SedValvePlu", blue3)
SelectSedValves := SelectLayer("SedValvePlu")
SedValveFrz := FreezeLayer("SedValvePlu")
SedAdapterLayer := layer_new("SedAdapterPlu", blue2)
SelectSedAdapters := SelectLayer("SedAdapterPlu")
SedAdapterFrz := FreezeLayer("SedAdapterPlu")
SedHopperDrainCoupling := CouplingSUBF(SedHopperDrainCoupling_Origin, [0; 0]*deg, ND_SedHopperDrain, PS_Default, ["SedTankCon"])
SedHopperDrainElbow := ElbowF(SedHopperDrainElbow_Origin, [90; 0; 45]*deg, ND_SedHopperDrain, PS_Default)
SedHopperDrainAdapter1 := MaleAdapterF(SedHopperDrainAdapter1_Origin, [0; 0]*deg, ND_SedHopperDrain, PS_Default)
SedHopperDrainAdapter2 := MaleAdapterF(SedHopperDrainAdapter2_Origin, [180; 0]*deg, ND_SedHopperDrain, PS_Default)
SedHopperDrainValve := insertdwg("https://confluence.cornell.edu/download/attachments/173604905/Sed-Scaled-Gate-Valve-Threaded.dwg", SedHopperDrainValve_Origin, 2*outerradius(ND_SedHopperDrain)/(1.16 m), 2*outerradius(ND_SedHopperDrain)/(1.16 m), 0 deg)
SedHopperDrainFittingScript := stack(SelectSedFittings, SedHopperDrainCoupling, SedFittingFrz, SedValveLayer, SedHopperDrainValve, SedValveFrz, SedAdapterLayer, SedHopperDrainAdapter1, SedHopperDrainAdapter2, SedAdapterFrz, SelectSedFittings, SedHopperDrainElbow, SedFittingFrz)
SedHopperDrainScript := stack(SedHopperDrainPipeScript, SedHopperDrainFittingScript)
# Sludge Drain Plumbing
# Origins and Dimensions
SedSludgeDrainCoupling_Origin := [
    CouplingLength(ND_SedSludgePipe) - SocketDepth(ND_SedSludgePipe) - T_PlantWall - L_Sed;
    W_SedBay/2;
    H_SedSludge - outerradius(ND_SedSludgePipe) - DropSedBottom
] + Plant_Origin
SedSludgeDrainPipe_Origin := Plant_Origin + [
    -L_Sed + L_SedHopper + T_ConcreteMin;
    W_SedBay/2;
    H_SedSludge - outerradius(ND_SedSludgePipe) - DropSedBottom
]
# the ten centimeters to ensure you can wrap your hand between two valves
L_SedSludgeValvePipe := -(SedHopperDrainElbow_Origin[0] - ElbowRadius(ND_SedHopperDrain) - ConRadius(ND_SedHopperDrain)) + (Plant_Origin[0] - L_Sed - T_PlantWall) + 10 cm
L_SedSludgeEmbeddedPipe := L_SedHopper + T_SedWeir + T_PlantWall - CouplingLength(ND_SedSludgePipe) + SocketDepth(ND_SedSludgePipe)
SedSludgeDrainAdapter1_Origin := Plant_Origin + [
    -L_Sed - T_PlantWall + SocketDepth(ND_SedSludgePipe) - L_SedSludgeValvePipe;
    W_SedBay/2;
    H_SedSludge - outerradius(ND_SedSludgePipe) - DropSedBottom
]
SedSludgeDrainValve_Origin := SedSludgeDrainAdapter1_Origin + [
    -MaleAdapterLength(ND_SedSludgePipe) + SocketDepth(ND_SedSludgePipe) + ValveSocket(ND_SedSludgePipe);
    0 m;
    0 m
]
# Sludge Drain Pipes
SedSludgeValvePipe := PipeF(SedSludgeDrainAdapter1_Origin + [L_SedSludgeValvePipe; 0; 0], L_SedSludgeValvePipe, [0; 0]*deg, ND_SedSludgePipe, PS_Default)
SedSludgePipe := PipeSUBF(SedSludgeDrainPipe_Origin, L_SedSludgeEmbeddedPipe, [0; 0]*deg, ND_SedSludgePipe, PS_Default, ["SedTankCon"])
SedSludgeDrainPipeScript := stack(SelectSedPipes, SedSludgePipe, SedSludgeValvePipe, SedPipeFrz)
# Sludge Drain Fittings
SedSludgeDrainAdapter1 := MaleAdapterF(SedSludgeDrainAdapter1_Origin, [0; 0]*deg, ND_SedSludgePipe, PS_Default)
SedSludgeDrainValve := insertdwg("https://confluence.cornell.edu/download/attachments/173604905/Sed-Scaled-Gate-Valve-Threaded.dwg", SedSludgeDrainValve_Origin, 2*outerradius(ND_SedSludgePipe)/(1.16 m), 2*outerradius(ND_SedSludgePipe)/(1.16 m), 0 deg)
SedSludgeCoupling := CouplingSUBF(SedSludgeDrainCoupling_Origin, [0; 0]*deg, ND_SedSludgePipe, PS_Default, ["SedTankCon"])
SedSludgeDrainFittingScript := stack(SelectSedAdapters, SedSludgeDrainAdapter1, SedAdapterFrz, SelectSedValves, SedSludgeDrainValve, SedValveFrz, SelectSedFittings, SedSludgeCoupling, SedFittingFrz)
SedSludgeDrainScript := stack(SedSludgeDrainPipeScript, SedSludgeDrainFittingScript)
# Lamella
# Origins and Dimensions
Lamina_Origin := [
    Plant_Origin[0] - cos(AN_SedPlate)*L_SedPlate;
    Plant_Origin[1];
    Z_SedLamellaBottom + Plant_Origin[2]
]
SedModCap_Origin := Lamina_Origin + [
    ConRadius(ND_SedModulePipe)*cos(AN_SedPlate) - CapThickness(ND_SedModulePipe)*sin(AN_SedPlate) + CapHeight(ND_SedModulePipe)/sin(AN_SedPlate);
    S_Fitting + ConRadius(ND_SedModulePipe);
    ConRadius(ND_SedModulePipe)*sin(AN_SedPlate) + CapThickness(ND_SedModulePipe)*cos(AN_SedPlate)
]
SedModMirrorLineX := SedModCap_Origin[0] - (CapHeight(ND_SedModulePipe) - CapThickness(ND_SedModulePipe))*sin(AN_SedPlate) + (L_SedPlate - B_SedPlate*(N_SedModulePlates - 1)/tan(AN_SedPlate) - 2*(SedModCap_Origin[2] + (CapHeight(ND_SedModulePipe) - CapThickness(ND_SedModulePipe))*cos(AN_SedPlate) - Lamina_Origin[2])/sin(AN_SedPlate))*cos(AN_SedPlate)/2
SedModMirrorLineZ := SedModCap_Origin[2] + (CapHeight(ND_SedModulePipe) - CapThickness(ND_SedModulePipe))*cos(AN_SedPlate) + (L_SedPlate - B_SedPlate*(N_SedModulePlates - 1)/tan(AN_SedPlate) - 2*(SedModCap_Origin[2] + (CapHeight(ND_SedModulePipe) - CapThickness(ND_SedModulePipe))*cos(AN_SedPlate) - Lamina_Origin[2])/sin(AN_SedPlate))*sin(AN_SedPlate)/2
# Lamella
SedLaminaLayer := layer_new("SedModLamella", purple)
MakeSedLamina := BoxF(Lamina_Origin, Lamina_Origin + [-T_SedPlate; W_SedBay; L_SedPlate], [0; 90 deg - AN_SedPlate; 0])
ArraySedLamina := ArrayLast(1, N_SedModulePlates, -B_SedPlate/sin(AN_SedPlate))
SedLaminaFrz := FreezeLayer("SedModLamella")
SedLaminaScript := stack(SedLaminaLayer, MakeSedLamina, ArraySedLamina, SedLaminaFrz)
# Module Connector Caps
SedModCapLayer := layer_new("SedModCapPlu", red)
SedModCapRight := CapF(SedModCap_Origin, [0; 0; 0], ND_SedModulePipe)
SedModCapLeft := CapF(SedModCap_Origin - [
    B_SedPlate*(N_SedModulePlates - 1) + T_SedPlate + 2*(CapHeight(ND_SedModulePipe) - ConRadius(ND_SedModulePipe) + outerradius(ND_SedModulePipe));
    0 m;
    0 m
], [0; 180 deg; 0], ND_SedModulePipe)
SedModCapFrz := FreezeLayer("SedModCapPlu")
SedModCapScript := stack(SedModCapLayer, SedModCapRight, SedModCapLeft, SedModCapFrz)
# Module Connector Pipes and Spacers
SedModPipeLayer := layer_new("SedModPipePlu", blue3)
SedModPipe := PipeF(SedModCap_Origin, B_SedPlate*(N_SedModulePlates - 1) + T_SedPlate + 2*(CapHeight(ND_SedModulePipe) - ConRadius(ND_SedModulePipe) + outerradius(ND_SedModulePipe)), [0; 0; 0], ND_SedModulePipe, PS_Modules)
SedModPipeFrz := FreezeLayer("SedModPipePlu")
SedModSpacerLayer := layer_new("SedModSpacerPlu", blue)
SedModSpacers := PipeF(SedModCap_Origin - [CapHeight(ND_SedModulePipe) + T_SedPlate - CapThickness(ND_SedModulePipe); 0; 0], B_SedPlate - T_SedPlate, [0; 0; 0], ND_SedModulePipeSpacer, PS_Modules)
ArraySedModSpacers := ArrayLast(1, N_SedModulePlates - 1, -B_SedPlate)
SedModSpacerFrz := FreezeLayer("SedModSpacerPlu")
SedModPipeScript := stack(SedModPipeLayer, SedModPipe, SedModPipeFrz, SedModSpacerLayer, SedModSpacers, ArraySedModSpacers, SedModSpacerFrz)
# Rotate and Array Connectors and Array Modules
ThawSedModPiping := ThawMultiple(["SedMod*Plu"])
RotateSedModPiping := Rotate_All([SedModCap_Origin[0]; SedModCap_Origin[2]; SedModCap_Origin[1]], AN_SedPlate - 90 deg)
MirrorSedModPipingUp := MirrorAll([SedModMirrorLineX; SedModMirrorLineZ], [SedModMirrorLineX; SedModMirrorLineZ] + [zc; -zc/tan(AN_SedPlate)], "n")
TripleSedModPiping := array_all(3, 1, (W_SedPlate - 2*(S_Fitting + ConRadius(ND_SedModulePipe)))/2)
ThawSedModLamella := ThawMultiple(["SedModLamella"])
ArraySedMod := array_all(1, N_SedModules, -B_SedPlate*N_SedModulePlates/sin(AN_SedPlate))
FreezeSedModComponents := FreezeMultiple(["SedMod*"])
SedModArrayScript := stack(ThawSedModPiping, view("f"), RotateSedModPiping, MirrorSedModPipingUp, view("t"), TripleSedModPiping, ThawSedModLamella, ArraySedMod, FreezeSedModComponents)
# Plate Settler Support Pipes
SedSupportAFSpace := 1.3 m
SedSupportPipeND := 2 in
N_SedSupportCrossPipe := ceil(L_Sed/SedSupportAFSpace)
SedSupportSpace := L_Sed/N_SedSupportCrossPipe
SedSupportLayer := layer_new("SedModSupportPlu", yellow)
SedSupportPipeTrans1 := PipeF([
    Plant_Origin[0] - SedSupportPipeND/2 - SedSupportSpace;
    Plant_Origin[1] + T_ConcreteMin;
    Z_SedLamellaBottom - SedSupportPipeND/2
], (W_Sed - 2*T_ConcreteMin)/2 - TeeLength(SedSupportPipeND) - SocketDepth(SedSupportPipeND), [-90; 0]*deg, SedSupportPipeND, PS_Default)
SedSupportPipeTrans2 := PipeF([
    Plant_Origin[0] - SedSupportPipeND/2 - SedSupportSpace;
    Plant_Origin[1] + T_ConcreteMin + (W_Sed/2 - T_ConcreteMin - SocketDepth(SedSupportPipeND));
    Z_SedLamellaBottom - SedSupportPipeND/2
], 2*SocketDepth(SedSupportPipeND), [-90; 0]*deg, SedSupportPipeND, PS_Default)
SedSupportPipeTrans3 := PipeF([
    Plant_Origin[0] - SedSupportPipeND/2 - SedSupportSpace;
    Plant_Origin[1] + T_ConcreteMin + (W_Sed - 2*T_ConcreteMin)/2 + TeeLength(SedSupportPipeND) + SocketDepth(SedSupportPipeND);
    Z_SedLamellaBottom - SedSupportPipeND/2
], (W_Sed - 2*T_ConcreteMin)/2 - TeeLength(SedSupportPipeND) - SocketDepth(SedSupportPipeND), [-90; 0]*deg, SedSupportPipeND, PS_Default)
SedSupportPipeTransArray := ArrayLast(1, N_SedSupportCrossPipe - 2, -SedSupportSpace)
SedSupportPipeTransMiddle := stack(SedSupportLayer, SedSupportPipeTrans1, SedSupportPipeTransArray, SedSupportPipeTrans2, SedSupportPipeTransArray, SedSupportPipeTrans3, SedSupportPipeTransArray)
SedSupportPipeTransFront := stack(PipeF([
    Plant_Origin[0] - SedSupportPipeND/2;
    Plant_Origin[1] + T_ConcreteMin;
    Z_SedLamellaBottom - SedSupportPipeND/2
], W_Sed/2 - T_ConcreteMin - TeeLength(SedSupportPipeND) - SocketDepth(SedSupportPipeND), [-90; 0]*deg, SedSupportPipeND, PS_Default), PipeF([
    Plant_Origin[0] - SedSupportPipeND/2;
    Plant_Origin[1] + T_ConcreteMin + ((W_Sed - 2*T_ConcreteMin)/2 - SocketDepth(SedSupportPipeND));
    Z_SedLamellaBottom - SedSupportPipeND/2
], (W_Sed/2 - T_ConcreteMin) + SocketDepth(SedSupportPipeND), [-90; 0]*deg, SedSupportPipeND, PS_Default))
SedSupportPipeTransEnd :=
    Script ← SelectLayer("SedModSupportPlu")
    for i ∈ N_SedSupportCrossPipe
        if mod(i, 2) == 1
            SedSupportPipeTrans ← stack(PipeF([
                Plant_Origin[0] - SedSupportPipeND/2 - (i - 1)*SedSupportSpace;
                Plant_Origin[1] + T_ConcreteMin;
                Z_SedLamellaBottom - SedSupportPipeND/2
            ], W_Sed/2 - T_ConcreteMin + SocketDepth(SedSupportPipeND), [-90; 0]*deg, SedSupportPipeND, PS_Default), PipeF([
                Plant_Origin[0] - SedSupportPipeND/2 - (i - 1)*SedSupportSpace;
                Plant_Origin[1] + T_ConcreteMin + W_Sed/2 - T_ConcreteMin + TeeLength(SedSupportPipeND) + SocketDepth(SedSupportPipeND);
                Z_SedLamellaBottom - SedSupportPipeND/2
            ], W_Sed/2 - T_ConcreteMin - TeeLength(SedSupportPipeND), [-90; 0]*deg, SedSupportPipeND, PS_Default))
        otherwise
            SedSupportPipeTrans ← stack(PipeF([
                Plant_Origin[0] - SedSupportPipeND/2 - (i - 1)*SedSupportSpace;
                Plant_Origin[1] + T_ConcreteMin;
                Z_SedLamellaBottom - SedSupportPipeND/2
            ], W_Sed/2 - T_ConcreteMin - TeeLength(SedSupportPipeND) - SocketDepth(SedSupportPipeND), [-90; 0]*deg, SedSupportPipeND, PS_Default), PipeF([
                Plant_Origin[0] - SedSupportPipeND/2 - (i - 1)*SedSupportSpace;
                Plant_Origin[1] + T_ConcreteMin + ((W_Sed - 2*T_ConcreteMin)/2 - SocketDepth(SedSupportPipeND));
                Z_SedLamellaBottom - SedSupportPipeND/2
            ], (W_Sed/2 - T_ConcreteMin) + SocketDepth(SedSupportPipeND), [-90; 0]*deg, SedSupportPipeND, PS_Default))
        Script ← stack(Script, SedSupportPipeTrans)
    return Script
SedSupportPipeLong :=
    Script ← SelectLayer("SedModSupportPlu")
    for i ∈ 1 .. N_SedSupportCrossPipe - 1
        if mod(i, 2) == 1
            SedSupportPipeLong ← PipeF([
                Plant_Origin[0] - SedSupportPipeND/2 - TeeLength(SedSupportPipeND)/2 - (i - 1)*SedSupportSpace;
                Plant_Origin[1] + W_Sed/2 - TeeLength(SedSupportPipeND)/2 - SocketDepth(SedSupportPipeND);
                Z_SedLamellaBottom - SedSupportPipeND/2
            ], SedSupportSpace - TeeLength(SedSupportPipeND), [0; 0]*deg, SedSupportPipeND, PS_Default)
        otherwise
            SedSupportPipeLong ← PipeF([
                Plant_Origin[0] - SedSupportPipeND/2 - TeeLength(SedSupportPipeND)/2 - (i - 1)*SedSupportSpace;
                (Plant_Origin[1] + W_Sed/2 + TeeLength(SedSupportPipeND)/2) + SocketDepth(SedSupportPipeND);
                Z_SedLamellaBottom - SedSupportPipeND/2
            ], SedSupportSpace - TeeLength(SedSupportPipeND), [0; 0]*deg, SedSupportPipeND, PS_Default)
        Script ← stack(Script, SedSupportPipeLong)
    return Script
SedSupportTees :=
    Script ← layer_new("SedModSupportTees", green)
    for i ∈ 1 .. N_SedSupportCrossPipe - 1
        if mod(i, 2) == 1
            SedSupportTees ← stack(TeeF([
                Plant_Origin[0] - SedSupportPipeND/2 - TeeLength(SedSupportPipeND)/2 - (i - 1)*SedSupportSpace;
                Plant_Origin[1] + W_Sed/2 - TeeLength(SedSupportPipeND)/2 - SocketDepth(SedSupportPipeND);
                Z_SedLamellaBottom - SedSupportPipeND/2
            ], [90; 0; 0]*deg, SedSupportPipeND, PS_Default), Mirror3dLast("yz", [
                Plant_Origin[0] - SedSupportPipeND/2 - (i - 1)*SedSupportSpace - SedSupportSpace/2;
                Plant_Origin[1] + W_Sed/2 - TeeLength(SedSupportPipeND)/2 - SocketDepth(SedSupportPipeND);
                Z_SedLamellaBottom - SedSupportPipeND/2
            ], "n"))
        otherwise
            SedSupportTees ← stack(TeeF([
                Plant_Origin[0] - SedSupportPipeND/2 - TeeLength(SedSupportPipeND)/2 - (i - 1)*SedSupportSpace;
                (Plant_Origin[1] + W_Sed/2) + TeeLength(SedSupportPipeND)/2 + SocketDepth(SedSupportPipeND);
                Z_SedLamellaBottom - SedSupportPipeND/2
            ], [90; 0; 0]*deg, SedSupportPipeND, PS_Default), Mirror3dLast("yz", [
                Plant_Origin[0] - SedSupportPipeND/2 - (i - 1)*SedSupportSpace - SedSupportSpace/2;
                Plant_Origin[1] + W_Sed/2 - TeeLength(SedSupportPipeND)/2 - SocketDepth(SedSupportPipeND);
                Z_SedLamellaBottom - SedSupportPipeND/2
            ], "n"))
        Script ← stack(Script, SedSupportTees)
    return Script
SedSupportPipe := stack(SedSupportPipeTransMiddle, SedSupportPipeTransFront, FreezeLayer("SedModSupportPlu"), SedSupportPipeTransEnd, FreezeLayer("SedModSupportPlu"), SedSupportPipeLong, FreezeLayer("SedModSupportPlu"))
SedSupportTeeConnections := stack(SedSupportTees, FreezeLayer("SedModSupportTees"))
SedSupport := stack(SedSupportPipe, SedSupportTeeConnections)
SedLamellaScript := stack(SedLaminaScript, SedModCapScript, SedModPipeScript, SedModArrayScript, SedSupport)
# Origins and Dimensions
# The floc skimmer is a 2 inch nominal diameter pipe that starts at a coupling in the wall of the sedimentation tank under the exit channel, wraps around the exit channel and ends a few centimeters below the surface of the water in the sed tank.Its purpose is to capture any flocs that pass up through the plate settlers when the cap on the top of the pipe is removed.
H_SkimmerToSurface := (HW_Sed - Z_SedLaunder - outerradius(ND_SedLaunder))/2 = 3.64539 cm
SedSkimmerCoupling_Origin := [
    Plant_Origin[0] - L_Sed - T_PlantWall + SocketDepth(ND_SedSkimmer);
    Plant_Origin[1] + W_SedBay/2 - ConRadius(ND_SedLaunder) - S_Fitting - ConRadius(ND_SedSkimmer);
    Z_SedChannelBottom - T_ChannelWall - S_Fitting - ConRadius(ND_SedSkimmer)
]
SedSkimmerCap_Origin := [
    Plant_Origin[0] - L_Sed + W_SedExitChannel + W_SedInletChannel + T_SedWeir + T_ChannelWall + CapDiameter(ND_SedSkimmer)/2;
    SedSkimmerCoupling_Origin[1];
    Plant_Origin[2] + HW_Sed - H_SkimmerToSurface
]
SedSkimmerHorizPipe_Origin := [
    SedSkimmerCap_Origin[0] - ElbowRadius(ND_SedSkimmer);
    SedSkimmerCoupling_Origin[1];
    SedSkimmerCoupling_Origin[2]
]
SedSkimmerElbow_Origin := SedSkimmerHorizPipe_Origin + [ElbowRadius(ND_SedSkimmer); 0; ElbowRadius(ND_SedSkimmer)]
SedSkimmerVertPipe_Origin := SedSkimmerCap_Origin
# Skimmer Fittings
SedSkimmerCap := CapF(SedSkimmerCap_Origin, [0; -90]*deg, ND_SedSkimmer)
SedSkimmerElbow := ElbowSUBF(SedSkimmerElbow_Origin, [0; 0; 270]*deg, ND_SedSkimmer, PS_Default, ["SedModLamella"])
SedSkimmerCoupling := CouplingSUBF(SedSkimmerCoupling_Origin, [0; 0; 90]*deg, ND_SedSkimmer, PS_Default, ["SedTankCon"])
SedSkimmerFittingScript := stack(SelectSedRemovables, SedSkimmerCap, SedRemovableFrz, SelectSedFittings, SedSkimmerElbow, SedSkimmerCoupling, SedFittingFrz)
# Skimmer Pipes
SedSkimmerHorizPipe := PipeSUBF(SedSkimmerHorizPipe_Origin, W_SedInletChannel + W_SedExitChannel + T_SedWeir + T_ChannelWall + T_PlantWall - CouplingLength(ND_SedSkimmer) + ConRadius(ND_SedSkimmer) + SocketDepth(ND_SedSkimmer) - ElbowRadius(ND_SedSkimmer), [0; 0]*deg, ND_SedSkimmer, PS_Default, ["SedTankCon"])
SedSkimmerVertPipe := PipeSUBF(SedSkimmerVertPipe_Origin, SedSkimmerVertPipe_Origin[2] - SedSkimmerElbow_Origin[2], [0; -90]*deg, ND_SedSkimmer, PS_Default, ["SedModLamella"])
SedSkimmerPipeScript := stack(SelectSedPipes, SedSkimmerHorizPipe, SedSkimmerVertPipe, SedPipeFrz)
SedSkimmerScript := stack(SedSkimmerFittingScript, SedSkimmerPipeScript)
# Floc Skimmer
# Hopper Viewer
SedHopperViewerStub_Origin := [
    Plant_Origin[0] - L_Sed + W_SedInletChannel + 2*T_SedWeir + W_SedExitChannelPostWeir + W_SedExitChannelPreWeir/2;
    SedManPipe_Origin[1] - ConRadius(ND_SedManifold) - 2*ConRadius(ND_SedSkimmer) - 2*S_Fitting - ConRadius(ND_SedHopperViewer);
    Z_SedChannelBottom - SocketDepth(ND_SedHopperViewer)
]
SedHopperViewerCoupling_Origin := SedHopperViewerStub_Origin
SedHopperViewerPipe_Origin := SedHopperViewerCoupling_Origin + [0 m; 0 m; -CouplingLength(ND_SedHopperViewer) + 2*SocketDepth(ND_SedHopperViewer)]
SedHopperViewerStub := PipeF(SedHopperViewerStub_Origin, SocketDepth(ND_SedHopperViewer) + H_SedInletChannel, [0; 90]*deg, ND_SedHopperViewer, PS_Default)
SedHopperViewerCoupling := CouplingSUBF(SedHopperViewerCoupling_Origin, [0; 270]*deg, ND_SedHopperViewer, PS_Default, ["SedTankCon"])
SedHopperViewerPipe := PipeSUBF(SedHopperViewerPipe_Origin, T_ChannelWall - CouplingLength(ND_SedHopperViewer) + SocketDepth(ND_SedHopperViewer), [0; 270]*deg, ND_SedHopperViewer, PS_Default, ["SedTankCon"])
SedHopperViewerScript := stack(SelectSedRemovables, SedHopperViewerStub, SedRemovableFrz, SelectSedFittings, SedHopperViewerCoupling, SedFittingFrz, SelectSedPipes, SedHopperViewerPipe, SedPipeFrz)
# [component: inputs SedHopperViewerScript]
# Complete A Single Sed Tank (array and add walls) (diffusers added later since they are not arrayed)
ThawSedBayArray := ThawMultiple(["Sed*"])
ArraySedBay := array_all(N_SedBays, 1, W_SedBay)
FreezeSedBayArray := FreezeMultiple(["Sed*"])
ArraySedBayScript := stack(ThawSedBayArray, FreezeSedModComponents, ArraySedBay, FreezeSedBayArray)
SedWallUnderChannel := BoxF([0 m; W_Sed; 0 m - DropSedBottom] + Plant_Origin, [
    -L_Sed + Plant_Origin[0];
    W_Sed + T_SedWallDivider + Plant_Origin[1];
    Z_SedChannelBottom - T_ChannelWall + DropSedBottom
], [0; 0; 0]*deg)
SedWallAboveChannel := BoxF([0 m; W_Sed; H_Sed] + Plant_Origin, [
    -L_Sed + W_SedInletChannel + W_SedExitChannel + T_ChannelWall + T_SedWeir;
    W_Sed + T_SedWallDivider;
    H_Sed - Z_SedChannelBottom - T_ChannelWall
] + Plant_Origin, [0; 0; 0]*deg)
SedPlateSupportLedgeScript := stack(SelectSedCon, SedWallUnderChannel, SedWallAboveChannel, FreezeSedTank)
CompleteSedTank :=
    SedPlateSupportLedgeScript if N_SedBays == 1
    stack(ArraySedBayScript, SedPlateSupportLedgeScript) otherwise
# Array Sed Tanks
ThawAllSed := ThawMultiple(["Sed*"])
ArraySedTank := Array_All(N_SedTanks, 1, W_Sed + T_SedWallDivider)
FreezeAllSed := FreezeMultiple(["Sed*"])
SelectSedConcrete := ThawMultiple(["SedTankCon"; "SedTankCon2"])
SedTankArrayScript := stack(ThawAllSed, FreezeSedModComponents, FreezeSedTank2, ArraySedTank, FreezeAllSed, SelectSedConcrete, BrepAll, Union_All, FreezeSedTank, FreezeSedTank2)
# Inlet Manifold Diffusers
SedDiffuser_Origin := [
    Plant_Origin[0] - L_Sed + L_SedHopper + L_SedDiffuserOutlet/2 + T_SedDiffuserWall + (W_SedInletChannelPreWeir + T_PlantWall)*(EN_InletChannelGeom == Inlet_FullDepth);
    SedManPipe_Origin[1];
    -innerdiameter(ND_SedManifold, PS_Default)/2 + SedManPipe_Origin[2]
]
SedDiffLayer := layer_new("SedManifoldDiffuserPlu", blue)
SedDiffOuterCircleSection := circle([SedDiffuser_Origin[0]; SedDiffuser_Origin[1]; SedDiffuser_Origin[2]], outerradius(ND_SedDiffuser))
SedDiffOuterRectangleSection := Pline3D([
    [
        SedDiffuser_Origin[0] + L_SedDiffuserOutlet/2 + T_SedDiffuserWall;
        SedDiffuser_Origin[1] + W_SedDiffuserOutlet/2 + T_SedDiffuserWall;
        SedDiffuser_Origin[2] - L_SedManifoldDiffuser
    ];
    [
        SedDiffuser_Origin[0] - L_SedDiffuserOutlet/2 - T_SedDiffuserWall;
        SedDiffuser_Origin[1] + W_SedDiffuserOutlet/2 + T_SedDiffuserWall;
        SedDiffuser_Origin[2] - L_SedManifoldDiffuser
    ];
    [
        SedDiffuser_Origin[0] - L_SedDiffuserOutlet/2 - T_SedDiffuserWall;
        SedDiffuser_Origin[1] - W_SedDiffuserOutlet/2 - T_SedDiffuserWall;
        SedDiffuser_Origin[2] - L_SedManifoldDiffuser
    ];
    [
        SedDiffuser_Origin[0] + L_SedDiffuserOutlet/2 + T_SedDiffuserWall;
        SedDiffuser_Origin[1] - W_SedDiffuserOutlet/2 - T_SedDiffuserWall;
        SedDiffuser_Origin[2] - L_SedManifoldDiffuser
    ];
    [
        SedDiffuser_Origin[0] + L_SedDiffuserOutlet/2 + T_SedDiffuserWall;
        SedDiffuser_Origin[1] + W_SedDiffuserOutlet/2 + T_SedDiffuserWall;
        SedDiffuser_Origin[2] - L_SedManifoldDiffuser
    ]
])
SedDiffZoomOuter := ZoomWindow([SedDiffuser_Origin[0] - L_SedDiffuserOutlet; SedDiffuser_Origin[1] + W_SedDiffuserOutlet], [SedDiffuser_Origin[0] + L_SedDiffuserOutlet; SedDiffuser_Origin[1] - W_SedDiffuserOutlet])
SedDiffOuterLoft := Loft([SedDiffuser_Origin[0] + outerradius(ND_SedDiffuser); SedDiffuser_Origin[1]; SedDiffuser_Origin[2]], [
    SedDiffuser_Origin[0] + L_SedDiffuserOutlet/2 + T_SedDiffuserWall;
    SedDiffuser_Origin[1] + W_SedDiffuserOutlet/2 + T_SedDiffuserWall;
    SedDiffuser_Origin[2] - L_SedManifoldDiffuser
])
SedDiffuserFreeze := FreezeLayer("SedManifoldDiffuserPlu")
SedDiffInnerCircleSection := circle([SedDiffuser_Origin[0]; SedDiffuser_Origin[1]; SedDiffuser_Origin[2]], innerdiameter(ND_SedDiffuser, PS_Default)/2)
SedDiffInnerRectangleSection := Pline3D([
    [
        SedDiffuser_Origin[0] + L_SedDiffuserOutlet/2;
        SedDiffuser_Origin[1] + W_SedDiffuserOutlet/2;
        SedDiffuser_Origin[2] - L_SedManifoldDiffuser
    ];
    [
        SedDiffuser_Origin[0] - L_SedDiffuserOutlet/2;
        SedDiffuser_Origin[1] + W_SedDiffuserOutlet/2;
        SedDiffuser_Origin[2] - L_SedManifoldDiffuser
    ];
    [
        SedDiffuser_Origin[0] - L_SedDiffuserOutlet/2;
        SedDiffuser_Origin[1] - W_SedDiffuserOutlet/2;
        SedDiffuser_Origin[2] - L_SedManifoldDiffuser
    ];
    [
        SedDiffuser_Origin[0] + L_SedDiffuserOutlet/2;
        SedDiffuser_Origin[1] - W_SedDiffuserOutlet/2;
        SedDiffuser_Origin[2] - L_SedManifoldDiffuser
    ];
    [
        SedDiffuser_Origin[0] + L_SedDiffuserOutlet/2;
        SedDiffuser_Origin[1] + W_SedDiffuserOutlet/2;
        SedDiffuser_Origin[2] - L_SedManifoldDiffuser
    ]
])
SedDiffZoomInner := ZoomWindow([SedDiffuser_Origin[0] - L_SedDiffuserOutlet; SedDiffuser_Origin[1] + W_SedDiffuserOutlet], [SedDiffuser_Origin[0] + L_SedDiffuserOutlet; SedDiffuser_Origin[1] - W_SedDiffuserOutlet])
SedDiffInnerLoft := Loft([
    SedDiffuser_Origin[0] + innerdiameter(ND_SedDiffuser, PS_Default)/2;
    SedDiffuser_Origin[1];
    SedDiffuser_Origin[2]
], [
    SedDiffuser_Origin[0] + L_SedDiffuserOutlet/2;
    SedDiffuser_Origin[1] + W_SedDiffuserOutlet/2;
    SedDiffuser_Origin[2] - L_SedManifoldDiffuser
])
SedDiffGroupInner := GroupAll("DeleteMe")
SedDiffSubtract := SubtractF(["SedManifoldDiffuserPlu"], "DeleteMe")
SedDiffSelect := SelectLayer("SedManifoldDiffuserPlu")
SedDiffArray := Array_All(1, N_SedManifoldPorts, B_SedManifoldPort)
SedDiffuserScript := stack(SedDiffLayer, SedDiffOuterCircleSection, SedDiffOuterRectangleSection, SedDiffZoomOuter, SedDiffOuterLoft, SedDiffuserFreeze, SedDiffInnerCircleSection, SedDiffInnerRectangleSection, SedDiffZoomInner, SedDiffInnerLoft, SedDiffGroupInner, SedDiffSubtract, SedDiffSelect, SedDiffArray, SedDiffuserFreeze)
# Finish Inlet and Exit Channels, and add last wall
# Finish tank walls
SelectSedCon
SedLowerWall := BoxF([-L_Sed - T_PlantWall; -T_PlantWall; H_Sed] + Plant_Origin, Plant_Origin + [T_PlantWall; 0; -T_PlantWall], [0; 0; 0]*deg)
SedWallTopUnderChannel := BoxF([0 m; (W_Sed + T_SedWallDivider)*N_SedTanks - T_SedWallDivider + T_PlantWall; 0 m] + Plant_Origin, [
    -L_Sed + Plant_Origin[0];
    -T_SedWallDivider + (W_Sed + T_SedWallDivider)*N_SedTanks + Plant_Origin[1];
    Z_SedChannelBottom - T_ChannelWall
], [0; 0; 0]*deg)
SedWallTopAboveChannel := BoxF([0 m; (W_Sed + T_SedWallDivider)*N_SedTanks - T_SedWallDivider + T_PlantWall; H_Sed] + Plant_Origin, [
    -L_Sed + W_SedInletChannel + W_SedExitChannel + T_ChannelWall + T_SedWeir;
    -T_SedWallDivider + (W_Sed + T_SedWallDivider)*N_SedTanks + Plant_Origin[1];
    H_Sed - Z_SedChannelBottom - T_ChannelWall
] + Plant_Origin, [0; 0; 0]*deg)
SedChannelCap := BoxF([
    -L_Sed + W_SedInletChannelPreWeir;
    (W_Sed + T_SedWallDivider)*N_SedTanks - T_SedWallDivider + T_PlantWall;
    H_Sed
] + Plant_Origin, [
    -L_Sed + W_SedInletChannel + W_SedExitChannel + T_SedWeir + Plant_Origin[0];
    -T_SedWallDivider + (W_Sed + T_SedWallDivider)*N_SedTanks + Plant_Origin[1];
    Z_SedChannelBottom
], [0; 0; 0]*deg) = "_box -8.82168,7.3008,2.19485 -8.06878,7.1508,1.74413"
SedTankWalls := stack(SelectSedCon, SedLowerWall, SedChannelCap, SedWallTopUnderChannel, SedWallTopAboveChannel)
# Channel Weirs and Dividing Wall
H_SedWeirInlet = 0.370714 m
SedInletChannelYWeir := BoxF([
    Plant_Origin[0] - L_Sed + W_SedInletChannelPreWeir;
    Plant_Origin[1] + 2*(S_Fitting + ConRadius(ND_SedExitChannelDrain));
    Z_SedChannelBottom
], [
    Plant_Origin[0] - L_Sed + W_SedInletChannelPreWeir + T_SedWeir;
    Plant_Origin[1] - T_PlantWall + (W_SedBay*N_SedBays + T_PlantWall)*N_SedTanks;
    Z_SedChannelBottom + H_SedWeirInlet
], [0; 0; 0]*deg)
H_PlantFreeboard = 0.1 m
SedInletChannelXWeir := BoxF([
    Plant_Origin[0] - L_Sed + W_SedInletChannelPreWeir;
    Plant_Origin[1] + 2*(S_Fitting + ConRadius(ND_SedExitChannelDrain));
    Z_SedChannelBottom
], [
    Plant_Origin[0] - L_Sed;
    Plant_Origin[1] + 2*(S_Fitting + ConRadius(ND_SedExitChannelDrain)) + T_SedWeir;
    Z_SedChannelBottom + H_SedWeirInlet
], [0; 0; 0]*deg)
SedChannelDivider := BoxF([Plant_Origin[0] - L_Sed + W_SedInletChannel; Plant_Origin[1]; Z_SedChannelBottom], [
    Plant_Origin[0] - L_Sed + W_SedInletChannel + T_SedWeir;
    Plant_Origin[1] - T_PlantWall + (W_SedBay*N_SedBays + T_PlantWall)*N_SedTanks;
    Z_SedChannelBottom + H_SedInletChannel
], [0; 0; 0]*deg)
SedExitChannelWeirY := BoxF([
    Plant_Origin[0] - L_Sed + W_SedInletChannel + T_SedWeir + W_SedExitChannelPostWeir;
    Plant_Origin[1];
    Z_SedChannelBottom
], [
    Plant_Origin[0] - L_Sed + W_SedInletChannel + 2*T_SedWeir + W_SedExitChannelPostWeir;
    Plant_Origin[1] - T_PlantWall + (W_SedBay*N_SedBays + T_SedWallDivider)*N_SedTanks - S_Fitting - OuterDiameterFittingPVC(ND_FiEntrancePipe);
    Z_SedChannelBottom + H_SedWeirExit
], [0; 0; 0]*deg)
SedExitChannelWeirX := BoxF([
    Plant_Origin[0] - L_Sed + W_SedInletChannel + T_SedWeir + W_SedExitChannelPostWeir;
    Plant_Origin[1] - T_PlantWall + (W_Sed + T_SedWallDivider)*N_SedTanks - OuterDiameterFittingPVC(ND_FiEntrancePipe) - S_Fitting - T_SedWeir;
    Z_SedChannelBottom
], [
    Plant_Origin[0] - L_Sed + W_SedInletChannel + 2*T_SedWeir + W_SedExitChannelPostWeir + W_SedExitChannelPreWeir;
    Plant_Origin[1] - T_PlantWall + (W_Sed + T_SedWallDivider)*N_SedTanks - S_Fitting - OuterDiameterFittingPVC(ND_FiEntrancePipe);
    Z_SedChannelBottom + H_SedWeirExit
], [0; 0; 0]*deg)
SedChannelWeirScript := stack(SedInletChannelYWeir, SedInletChannelXWeir, SedChannelDivider, SedExitChannelWeirY, SedExitChannelWeirX, Union_All, FreezeSedTank)
FinishSedChannelScript := stack(SedTankWalls, SedChannelWeirScript)
# Inlet Channel Drain
# Origins and Dimensions
SedIChannelDrainVertCoupling_Origin := [
    Plant_Origin[0] - L_Sed - T_PlantWall + max(T_PlantWall, CouplingLength(ND_SedInletChannelDrain)) + SocketDepth(ND_SedInletChannelDrain) + ElbowRadius(ND_SedInletChannelDrain);
    Plant_Origin[1] + S_Fitting + ConRadius(ND_SedInletChannelDrain);
    Plant_Origin[2] + Z_SedChannelBottom - CouplingLength(ND_SedInletChannelDrain) + SocketDepth(ND_SedInletChannelDrain)
]
L_SedIChannelVertPipe := Z_SedChannelBottom - CouplingLength(ND_SedInletChannelDrain) - ElbowRadius(ND_SedInletChannelDrain) - ConRadius(ND_SedInletChannelDrain)
L_SedIChannelHorizPipe := SedIChannelDrainVertCoupling_Origin[0] - (Plant_Origin[0] - L_Sed - T_PlantWall) - CouplingLength(ND_SedInletChannelDrain) + SocketDepth(ND_SedInletChannelDrain) - ElbowRadius(ND_SedInletChannelDrain)
SedIChannelDrainHorizCoupling_Origin := [
    Plant_Origin[0] - T_PlantWall - SocketDepth(ND_SedExitChannelDrain) - L_Sed + CouplingLength(ND_SedExitChannelDrain);
    SedIChannelDrainVertCoupling_Origin[1];
    SedIChannelDrainVertCoupling_Origin[2] - L_SedIChannelVertPipe - ElbowRadius(ND_SedExitChannelDrain)
]
# Inlet Channel Drain Fittings
SedIChannelDrainVertCoupling := CouplingSUBF(SedIChannelDrainVertCoupling_Origin, [0; 90; 0]*deg, ND_SedInletChannelDrain, PS_Default, ["SedTankCon"])
SedIChannelDrainElbow := ElbowSUBF(SedIChannelDrainVertCoupling_Origin + [0 m; 0 m; -L_SedIChannelVertPipe], [0; 0; 270]*deg, ND_SedInletChannelDrain, PS_Default, ["SedTankCon"])
SedIChannelHorizCoupling := CouplingSUBF(SedIChannelDrainHorizCoupling_Origin, [0; 0; 0]*deg, ND_SedExitChannelDrain, PS_Default, ["SedTankCon"])
SedInletChannelDrainFittingScript := stack(SelectSedFittings, SedIChannelDrainVertCoupling, SedIChannelDrainElbow, SedIChannelHorizCoupling, SedFittingFrz)
distancefromflocweir := Z_SedChannelBottom - T_ChannelWall - Z_SedFlocWeir = 64.8884 cm
# Inlet Channel Drain Pipes
SedIChannelDrainHorizPipe := PipeSUBF([
    SedIChannelDrainVertCoupling_Origin[0] - ElbowRadius(ND_SedInletChannelDrain);
    SedIChannelDrainVertCoupling_Origin[1];
    SedIChannelDrainHorizCoupling_Origin[2]
], L_SedIChannelHorizPipe, [0; 0; 0]*deg, ND_SedInletChannelDrain, PS_Default, ["SedTankCon"])
SedIChannelDrainVertPipe := PipeSUBF(SedIChannelDrainVertCoupling_Origin, L_SedIChannelVertPipe, [0; 270; 0]*deg, ND_SedInletChannelDrain, PS_Default, ["SedTankCon"])
SedIChannelDrainStub := PipeF(SedIChannelDrainVertCoupling_Origin + [0 m; 0 m; CouplingLength(ND_SedInletChannelDrain) - 2*SocketDepth(ND_SedInletChannelDrain)], H_SedInletChannel + SocketDepth(ND_SedInletChannelDrain), [0; 90; 0]*deg, ND_SedInletChannelDrain, PS_Default)
SedInletChannelDrainPipeScript := stack(SelectSedPipes, SedIChannelDrainHorizPipe, SedIChannelDrainVertPipe, SedPipeFrz, SelectSedRemovables, SedIChannelDrainStub, SedRemovableFrz)
SedInletDrainScript := stack(SedInletChannelDrainFittingScript, SedInletChannelDrainPipeScript)
# Outlets to Filter
# Origins and Dimensions
SedOutletCoupling1_Origin(N) := [
    Plant_Origin[0] - L_Sed + W_SedInletChannel + T_SedWeir + ConRadius(ND_FiEntrancePipe);
    Plant_Origin[1] - T_PlantWall + (W_SedBay*N_SedBays + T_SedWallDivider)*N_SedTanks - ConRadius(ND_FiEntrancePipe) - S_Fitting - (N - 1)*W_SedBay - T_PlantWall*floor((N - 1)/N_SedBays);
    Z_SedChannelBottom - SocketDepth(ND_FiEntrancePipe)
]
SedOutletVertPipe_Origin(N) := SedOutletCoupling1_Origin(N) + [0; 0; 2*SocketDepth(ND_FiEntrancePipe) - CouplingLength(ND_FiEntrancePipe)]
L_SedOutletVertPipe := 2*SocketDepth(ND_FiEntrancePipe) + max(0, T_ChannelWall - CouplingLength(ND_FiEntrancePipe))
SedOutletElbow_Origin(N) := SedOutletVertPipe_Origin(N) - [0; 0; L_SedOutletVertPipe]
SedOutletCoupling2_Origin(N) := [
    Plant_Origin[0] - T_PlantWall - L_Sed + CouplingLength(ND_FiEntrancePipe) - SocketDepth(ND_FiEntrancePipe);
    SedOutletElbow_Origin(N)[1];
    -ElbowRadius(ND_FiEntrancePipe) + SedOutletElbow_Origin(N)[2]
]
SedOutletHorizPipe_Origin(N) := [-ElbowRadius(ND_FiEntrancePipe); 0; -ElbowRadius(ND_FiEntrancePipe)] + SedOutletElbow_Origin(N)
# If there are two filters, the second filter runs into the platform with the sed tanks on it. We need to move the outlet pipes to the filter down along the (y axis) outlet channel so that the filter also slides down.
MoveOutletDown :=
    N_Fi - 1 if N_Fi ≥ 2
    0 otherwise
# Sed Outlet Fittings
SedOutletCoupling1Script :=
    Local ← SelectSedFittings
    for i ∈ 1 + MoveOutletDown .. N_FiEntrancePipes + MoveOutletDown
        OutletCoupling ← CouplingSUBF(SedOutletCoupling1_Origin(i), [0; 270]*deg, ND_FiEntrancePipe, PS_Default, ["SedTankCon"])
        Local ← stack(Local, OutletCoupling)
    Local ← stack(Local, SedFittingFrz)
    return Local
move
SedOutletElbowScript :=
    Local ← SelectSedFittings
    for i ∈ 1 + MoveOutletDown .. N_FiEntrancePipes + MoveOutletDown
        OutletElbow ← ElbowSUBF(SedOutletElbow_Origin(i), [0; 0; 270]*deg, ND_FiEntrancePipe, PS_Default, ["SedTankCon"])
        Local ← stack(Local, OutletElbow)
    Local ← stack(Local, SedFittingFrz)
    return Local
SedOutletCoupling2Script :=
    Local ← SelectSedFittings
    for i ∈ 1 + MoveOutletDown .. N_FiEntrancePipes + MoveOutletDown
        OutletCoupling ← CouplingSUBF(SedOutletCoupling2_Origin(i), [0; 0]*deg, ND_FiEntrancePipe, PS_Default, ["SedTankCon"])
        Local ← stack(Local, OutletCoupling)
    Local ← stack(Local, SedFittingFrz)
    return Local
# Sed Outlet Pipes
SedOutletVertPipeScript :=
    Local ← SelectSedPipes
    for i ∈ 1 + MoveOutletDown .. N_FiEntrancePipes + MoveOutletDown
        OutletPipe ← PipeSUBF(SedOutletVertPipe_Origin(i), L_SedOutletVertPipe, [0; 270]*deg, ND_FiEntrancePipe, PS_Default, ["SedTankCon"])
        Local ← stack(Local, OutletPipe)
    Local ← stack(Local, SedPipeFrz)
    return Local
SedOutletHorizPipeScript :=
    Local ← SelectSedPipes
    for i ∈ 1 + MoveOutletDown .. N_FiEntrancePipes + MoveOutletDown
        OutletPipe ← PipeSUBF(SedOutletHorizPipe_Origin(i), SedOutletElbow_Origin(i)[0] - ElbowRadius(ND_FiEntrancePipe) - (Plant_Origin[0] - T_PlantWall - L_Sed + CouplingLength(ND_FiEntrancePipe) - SocketDepth(ND_FiEntrancePipe)), [0; 0]*deg, ND_FiEntrancePipe, PS_Default, ["SedTankCon"])
        Local ← stack(Local, OutletPipe)
    Local ← stack(Local, SedPipeFrz)
    return Local
SedOutletScript := stack(SedOutletCoupling1Script, SedOutletElbowScript, SedOutletCoupling2Script, SedOutletVertPipeScript, SedOutletHorizPipeScript)
# Inlet Channel
InletFloorHeight := (H_SedWeirInlet - H_PlantFreeboard)/(N_SedTanks - 1)
# InletHeight determines the change in Z for each incline.  it returns an array of heights from heighest to lowest
InletHeight :=
    dZ ← InletFloorHeight
    i ← 1
    while i ≤ N_SedTanks
        Height ← stack(Height, (N_SedTanks - i)*dZ)
        i ← i + 1
    return Height
ExtraSpace := (W_Sed - 2*ConRadius(ND_SedManifold) - 2*S_Fitting)/2 = 0.365131 m
Space := ExtraSpace - 2*S_Fitting - 2*ConRadius(ND_SedHopperViewer) = 0.196869 m
InletOrigin := [
    Plant_Origin[0] - L_Sed + W_SedInletChannelPreWeir;
    Plant_Origin[1] + 2*(S_Fitting + ConRadius(ND_SedExitChannelDrain)) + T_SedWeir;
    Z_SedChannelBottom
]
InletCalculations := stack(InletFloorHeight, InletHeight, ExtraSpace, Space)
SelectSedCon := SelectLayer("SedTankCon")
FreezeSedTank := FreezeLayer("SedTankCon")
AngleInletFloor :=
    local ← SelectSedCon
    dZ ← InletFloorHeight
    HeightVector ← InletHeight
    BlockOrigin ← InletOrigin
    BlockFarCorner ← [
        BlockOrigin[0] - W_SedInletChannelPreWeir;
        Plant_Origin[1] + (-W_SedDiffuserOutlet/2) + outerradius(ND_SedJetReverser) + W_SedBay/2 - T_SedDiffuserWall - S_FromSedWall + ConRadius(ND_SedManifold) + T_SedWallDivider + ExtraSpace + Space + 3*S_Fitting + 2*ConRadius(ND_SedHopperViewer);
        (BlockOrigin[2] + HeightVector[1])
    ]
    Block ← BoxF(BlockOrigin, BlockFarCorner, [0; 0; 0]*deg)
    local ← stack(local, Block)
    NumTanks ← 2
    while NumTanks ≤ (N_SedTanks - 1)
        BlockOrigin ← BlockFarCorner + [W_SedInletChannelPreWeir; 0 m; -HeightVector[NumTanks - 1]]
        BlockFarCorner ← BlockOrigin + [
            -W_SedInletChannelPreWeir;
            4*S_Fitting + 2*ConRadius(ND_SedManifold) + T_SedWallDivider + ExtraSpace + Space + 2*ConRadius(ND_SedHopperViewer);
            HeightVector[NumTanks]
        ]
        Block ← BoxF(BlockOrigin, BlockFarCorner, [0; 0; 0]*deg)
        local ← stack(local, Block)
        NumTanks ← NumTanks + 1
    local ← stack(local, FreezeSedTank)
    WedgeOrigin ← [
        InletOrigin[0];
        Plant_Origin[1] + (-W_SedDiffuserOutlet/2) + outerradius(ND_SedJetReverser) + W_SedBay/2 - T_SedDiffuserWall - S_FromSedWall + ConRadius(ND_SedManifold) + T_SedWallDivider + ExtraSpace + Space + 3*S_Fitting + 2*ConRadius(ND_SedHopperViewer);
        InletOrigin[2] + HeightVector[1]
    ]
    WedgeFarCorner ← WedgeOrigin + [(-T_SedWallDivider - ExtraSpace) - Space; -W_SedInletChannelPreWeir; dZ]
    Wedge ← WedgeF(WedgeOrigin, WedgeFarCorner, [-90; 0; 180]*deg)
    local ← stack(local, Wedge)
    NumTanks ← 2
    while NumTanks ≤ (N_SedTanks - 1)
        WedgeOrigin ← WedgeOrigin + [
            0 m;
            4*S_Fitting + 2*ConRadius(ND_SedHopperViewer) + 2*ConRadius(ND_SedManifold) + Space + T_SedWallDivider + ExtraSpace;
            -dZ
        ]
        WedgeFarCorner ← WedgeOrigin + [-T_SedWallDivider - ExtraSpace - Space; -W_SedInletChannelPreWeir; dZ]
        Wedge ← WedgeF(WedgeOrigin, WedgeFarCorner, [-90; 0; 180]*deg)
        local ← stack(local, Wedge)
        NumTanks ← NumTanks + 1
    local ← stack(local, GroupDelete)
    SubtractWedge ← SubtractF(["SedTankCon"], "DeleteMe")
    local ← stack(local, SubtractWedge)
    return local
SedInletFittings := layer_new("SedInletFitting", green)
SelectSedInletFittings := SelectLayer("SedInletFitting")
SedInletFittingFrz := FreezeLayer("SedInletFitting")
ElevateCoupling :=
    local ← SedInletFittings
    dZ ← InletFloorHeight
    HeightVector ← InletHeight
    CouplingOrigin ← SedManVertCoupling_Origin + [0 m; 0 m; HeightVector[1]]
    Coupling1 ← CouplingSUBF(CouplingOrigin, [0; 270]*deg, ND_SedManifold, PS_Default, ["SedTankCon"])
    local ← stack(local, Coupling1)
    NumPipes ← 2
    while NumPipes ≤ N_SedTanks
        CouplingOrigin ← CouplingOrigin + [0 m; 2*S_Fitting + 2*ConRadius(ND_SedManifold) + T_SedWallDivider + 2*ExtraSpace; -dZ]
        Coupling ← CouplingSUBF(CouplingOrigin, [0; 270]*deg, ND_SedManifold, PS_Default, ["SedTankCon"])
        local ← stack(local, Coupling)
        NumPipes ← NumPipes + 1
    local ← stack(local, SedInletFittingFrz)
    return local
SedManVertPipe := PipeSUBF(SedManVertPipe_Origin, L_SedManVertPipe, [0; 270]*deg, ND_SedManifold, PS_Default, ["SedTankCon"])
SedInletPipes := layer_new("SedInletPipes", blue)
SelectSedInletPipes := SelectLayer("SedInletPipes")
SedInletPipeFrz := FreezeLayer("SedInletPipes")
LongerPipes :=
    local ← SedInletPipes
    dZ ← InletFloorHeight
    HeightVector ← InletHeight
    PipeOrigin ← SedManVertPipe_Origin + [0 m; 0 m; -L_SedManVertPipe]
    PipeLength ← L_SedManVertPipe + HeightVector[1]
    Pipe1 ← PipeSUBF(PipeOrigin, PipeLength, [0; 90]*deg, ND_SedManifold, PS_Default, ["SedTankCon"])
    local ← stack(local, Pipe1)
    NumPipes ← 2
    while NumPipes ≤ N_SedTanks
        PipeOrigin ← PipeOrigin + [0 m; 2*S_Fitting + 2*ConRadius(ND_SedManifold) + T_SedWallDivider + 2*ExtraSpace; 0 m]
        PipeLength ← PipeLength - dZ
        Pipe ← PipeSUBF(PipeOrigin, PipeLength, [0; 90]*deg, ND_SedManifold, PS_Default, ["SedTankCon"])
        local ← stack(local, Pipe)
        NumPipes ← NumPipes + 1
    local ← stack(local, SedInletPipeFrz)
    return local
SedRemovableLayer := layer_new("SedRemovablePlu", red)
SelectSedRemovables := SelectLayer("SedRemovablePlu")
SedRemovableFrz := FreezeLayer("SedRemovablePlu")
ShorterRemovablePipes :=
    local ← SedRemovableLayer
    dZ ← InletFloorHeight
    HeightVector ← InletHeight
    PipeOrigin ← [
        X_SedManStub;
        Plant_Origin[1] + (-W_SedDiffuserOutlet/2) + outerradius(ND_SedJetReverser) + W_SedBay/2 - T_SedDiffuserWall - S_FromSedWall;
        Z_SedChannelBottom - SocketDepth(ND_SedManifold) + HeightVector[1]
    ]
    PipeLength ← H_SedInletChannel + SocketDepth(ND_SedManifold) - HeightVector[1]
    Pipe1 ← PipeF(PipeOrigin, PipeLength, [0; 90]*deg, ND_SedManifold, PS_Default)
    local ← stack(local, Pipe1)
    NumPipes ← 2
    while NumPipes ≤ N_SedTanks
        PipeOrigin ← PipeOrigin + [0 m; 2*S_Fitting + 2*ConRadius(ND_SedManifold) + T_SedWallDivider + 2*ExtraSpace; -dZ]
        PipeLength ← PipeLength + dZ
        Pipe ← PipeSUBF(PipeOrigin, PipeLength, [0; 90]*deg, ND_SedManifold, PS_Default, ["SedTankCon"])
        local ← stack(local, Pipe)
        NumPipes ← NumPipes + 1
    local ← stack(local, SedRemovableFrz)
    return local
SedHopperViewerCoupling :=
    local ← SelectSedInletFittings
    dZ ← InletFloorHeight
    HeightVector ← InletHeight
    CouplingOrigin ← [
        SedManVertCoupling_Origin[0];
        SedManVertCoupling_Origin[1] + ConRadius(ND_SedHopperViewer) + ConRadius(ND_SedManifold) + 2*S_Fitting;
        Z_SedChannelBottom - SocketDepth(ND_SedHopperViewer) + HeightVector[1]
    ]
    Coupling1 ← CouplingSUBF(CouplingOrigin, [0; 270]*deg, ND_SedHopperViewer, PS_Default, ["SedTankCon"])
    local ← stack(local, Coupling1)
    NumPipes ← 2
    while NumPipes ≤ N_SedTanks
        CouplingOrigin ← CouplingOrigin + [0 m; W_Sed + T_SedWallDivider; -dZ]
        Coupling ← CouplingSUBF(CouplingOrigin, [0; 270]*deg, ND_SedHopperViewer, PS_Default, ["SedTankCon"])
        local ← stack(local, Coupling)
        NumPipes ← NumPipes + 1
    local ← stack(local, SedInletFittingFrz)
    return local
HopperViewerShorterPipes :=
    local ← SelectSedRemovables
    dZ ← InletFloorHeight
    HeightVector ← InletHeight
    PipeOrigin ← [
        SedManVertCoupling_Origin[0];
        SedManVertCoupling_Origin[1] + ConRadius(ND_SedHopperViewer) + ConRadius(ND_SedManifold) + 2*S_Fitting;
        Z_SedChannelBottom - SocketDepth(ND_SedHopperViewer) + HeightVector[1]
    ]
    PipeLength ← H_SedInletChannel + SocketDepth(ND_SedHopperViewer) - HeightVector[1]
    Pipe1 ← PipeF(PipeOrigin, PipeLength, [0; 90]*deg, ND_SedHopperViewer, PS_Default)
    local ← stack(local, Pipe1)
    NumPipes ← 2
    while NumPipes ≤ N_SedTanks
        PipeOrigin ← PipeOrigin + [0 m; W_Sed + T_SedWallDivider; -dZ]
        PipeLength ← PipeLength + dZ
        Pipe ← PipeSUBF(PipeOrigin, PipeLength, [0; 90]*deg, ND_SedHopperViewer, PS_Default, ["SedTankCon"])
        local ← stack(local, Pipe)
        NumPipes ← NumPipes + 1
    local ← stack(local, SedRemovableFrz)
    return local
Space = 0.196869 m
T_SedWallDivider = 0.15 m
SedHopperViewerPipe := PipeSUBF(SedHopperViewerPipe_Origin, T_ChannelWall - CouplingLength(ND_SedHopperViewer) + SocketDepth(ND_SedHopperViewer), [0; 270]*deg, ND_SedHopperViewer, PS_Default, ["SedTankCon"])
HopperViewerLowerPipes :=
    local ← SelectSedInletPipes
    dZ ← InletFloorHeight
    HeightVector ← InletHeight
    PipeOrigin ← [
        SedManVertCoupling_Origin[0];
        SedManVertCoupling_Origin[1] + ConRadius(ND_SedHopperViewer) + ConRadius(ND_SedManifold) + 2*S_Fitting;
        Z_SedChannelBottom - SocketDepth(ND_SedHopperViewer) + HeightVector[1] - CouplingLength(ND_SedHopperViewer) + 2*SocketDepth(ND_SedHopperViewer)
    ]
    PipeLength ← T_ChannelWall - CouplingLength(ND_SedHopperViewer) + SocketDepth(ND_SedHopperViewer) + HeightVector[1]
    Pipe1 ← PipeF(PipeOrigin, PipeLength, [0; 270]*deg, ND_SedHopperViewer, PS_Default)
    local ← stack(local, Pipe1)
    NumPipes ← 2
    while NumPipes ≤ N_SedTanks
        PipeOrigin ← PipeOrigin + [0 m; W_Sed + T_SedWallDivider; -dZ]
        PipeLength ← PipeLength - dZ
        Pipe ← PipeSUBF(PipeOrigin, PipeLength, [0; 270]*deg, ND_SedHopperViewer, PS_Default, ["SedTankCon"])
        local ← stack(local, Pipe)
        NumPipes ← NumPipes + 1
    local ← stack(local, SedInletPipeFrz)
    return local
SedInletChannelScript := stack(InletCalculations, SedTankLayer, AngleInletFloor, ElevateCoupling, LongerPipes, ShorterRemovablePipes, SedHopperViewerCoupling, HopperViewerShorterPipes, HopperViewerLowerPipes)
# Add Water Levels
SedWaterLayer := layer_new("SedWater", blue2)
SedWaterBox := BoxF(Plant_Origin, [-L_SedUpflow; W_Sed; HW_Sed] + Plant_Origin, [0; 0; 0]*deg)
SedIChannelWater := BoxF([Plant_Origin[0] - L_Sed; Plant_Origin[1]; Z_SedChannelBottom], [Plant_Origin[0] - L_Sed; Plant_Origin[1]; Z_SedChannelBottom] + [W_SedInletChannelPreWeir + T_SedWeir + W_SedInletChannelPostWeir; W_Sed; HW_SedInletChannel], [0; 0; 0]*deg)
SedEChannelWater := BoxF([
    Plant_Origin[0] - L_Sed + W_SedInletChannel + 2*T_SedWeir + W_SedExitChannelPostWeir;
    Plant_Origin[1];
    Z_SedChannelBottom
], [
    Plant_Origin[0] - L_Sed + W_SedInletChannel + T_SedWeir + W_SedExitChannel;
    Plant_Origin[1] + W_Sed;
    Z_SedChannelBottom + HW_SedExitChannel
], [0; 0; 0]*deg)
SedWaterFrz := FreezeLayer("SedWater")
SedWaterScript := stack(SedWaterLayer, SedWaterBox, SedIChannelWater, SedEChannelWater, SedWaterFrz)
ThawAll := ThawMultiple(["Sed*"])
MirrorDistance :=
    (Floc_Origin[0] - L_Floc - W_TrainWalkway/2 - T_PlantWall) if Mod == 0
    (Plant_Origin[0] - L_Sed - W_TrainWalkway - 2*T_PlantWall) otherwise
MirrorSedTanks := Mirror3dAll("yz", [MirrorDistance; 0 m], "n")
EN_DoubleTrain = 0
FreezeAll := FreezeMultiple(["Sed*"])
AC_SedTankWater := stack(SedConScript, SedDrainCoverScript, SedManifoldScript, SedLaunderScript, SedHopperDrainScript, SedSludgeDrainScript, SedLamellaScript, SedSkimmerScript, CompleteSedTank, SedTankArrayScript, SedDiffuserScript, FinishSedChannelScript, SedInletDrainScript, SedOutletScript, SedWaterScript, SedInletChannelScript)
AC_SedTank :=
    stack(SedConScript, SedDrainCoverScript, SedManifoldScript, SedLaunderScript, SedHopperDrainScript, SedSludgeDrainScript, SedLamellaScript, SedSkimmerScript, CompleteSedTank, SedTankArrayScript, SedDiffuserScript, FinishSedChannelScript, SedInletDrainScript, SedOutletScript, SedInletChannelScript) if EN_DoubleTrain == 0
    stack(SedConScript, SedDrainCoverScript, SedManifoldScript, SedLaunderScript, SedHopperDrainScript, SedSludgeDrainScript, SedLamellaScript, SedSkimmerScript, CompleteSedTank, SedTankArrayScript, SedDiffuserScript, FinishSedChannelScript, SedInletDrainScript, SedOutletScript, ThawAll, MirrorSedTanks, FreezeAll, SedInletChannelScript) otherwise
AC_SedTank :=
    AC_SedTank if EN_Water == 0
    AC_SedTankWater otherwise
AC_SedTankMod := stack(SedConScript, SedDrainCoverScript, SedManifoldScript, SedLaunderScript, SedHopperDrainScript, SedSludgeDrainScript, SedLamellaScript, SedSkimmerScript, CompleteSedTank, SedTankArrayScript, SedDiffuserScript, FinishSedChannelScript, SedInletDrainScript, SedOutletScript, SedInletChannelScript)
Check := stack(SedConScript, SedDrainCoverScript, SedManifoldScript, SedLaunderScript, SedHopperDrainScript, SedSludgeDrainScript, SedLamellaScript, SedSkimmerScript, CompleteSedTank, SedTankArrayScript, SedDiffuserScript, FinishSedChannelScript, SedInletDrainScript, SedInletChannelScript)
# [component: inputs Check]
# [component: inputs SedInletChannelScript]
SedTank := AC_SedTank
# [component: inputs SedTank]
