L_SedManConnectionStub := 4 cm
L_SedManFirstDiffuserGap := 3 cm
# Sedimentation Tank
# design at half flow rate for plants which are "double train" i.e. over 100Lps. this applies to the sed tank, flocculator and lfom files, in the entrance tank file this returns to the design flow and then goes back to half for the srsf.
H_FlocWeirToLamella := H_FlocWeirToLamellaMin = 0.1 m
# In the sed tanks, use Q.Train instead of Q.Plant
HL_SedToFiPipeMax := 10 cm
L_SedManifoldDiffuser := 15 cm
L_SedHopperMin := 50 cm
H_JetReverserToDiffusers := 3 cm
ED_SedInletMax := 150*mW/kg
L_SedManifoldPipeFromTankEnd := 2 cm
W_Sed := W_SedBay = 1.0668 m
Pi_QSedInlet := 0.8
Pi_PvcStretch := 1.2
H_LamellaToLaunder := 5 cm
ND_SedPlateFrame := 1.5 in
L_SedPlateEst := 60 cm
H_FlocWeirToLamella
H_FlocWeirToPlateFrame := 10 cm
# Inlet manifold diffuser design for energy dissipation rate
W_SedDiffuserInnerMin := ((Pi_JetPlane*W_Sed*V_SedUpBod)^3/ED_SedInletMax)^(1/4) = 3.09868 mm
W_SedDiffuserInner := max(Ceil(W_SedDiffuserInnerMin, 1/16*in), 1/16*in) = 0.125 in
ED_SedInlet := (Pi_JetPlane*V_SedUpBod*W_Sed)^3/W_SedDiffuserInner^4 = 136.089 mW/kg
T_SedDiffuserPvc := (outerdiameter(ND_SedDiffuser) - innerdiameter(ND_SedDiffuser, PS_Default))/(2*Pi_PvcStretch)
Circ_SedDiffuserInner := Pi_PvcStretch*π*innerdiameter(ND_SedDiffuser, PS_Default)
L_SedDiffuserInner := (Circ_SedDiffuserInner - 2*W_SedDiffuserInner)/2
B_SedDiffuser := L_SedDiffuserInner + 2*T_SedDiffuserPvc = 5.60448 cm
B_SedDiffuser := 6 cm
V_SedDiffuser := V_SedUpBod*W_Sed*B_SedDiffuser/(W_SedDiffuserInner*(B_SedDiffuser - 2*T_SedDiffuserPvc)) = 0.353457 m/s
HL_SedDiffuser := V_SedDiffuser^2/(2*g) = 0.636975 cm
# Max manifold flow rate
Q_SedManifoldMaxED := Q_PipeED(ED_SedInletMax, innerdiameter(ND_SedManifoldMax, PS_Default), Pi_VenaContractaOrifice, Pi_JetRound) = 14.4341 L/s
V_SedManifoldMaxFlowDist := sqrt(((1 - Pi_QSedInlet^2)/(Pi_QSedInlet^2 + 1))*4*g*HL_SedDiffuser) = 0.234197 m/s
Q_SedManifoldMaxFlowDist := π*(innerdiameter(ND_SedManifoldMax, PS_Default)/2)^2*V_SedManifoldMaxFlowDist = 7.44557 L/s
Q_SedManifoldMax := min(Q_SedManifoldMaxED, Q_SedManifoldMaxFlowDist) = 7.44557 L/s
N_SedTanks := ceil(Q_Train/Q_SedManifoldMax) = 7
Q_SedManifoldMaxFlowDist := π*(innerdiameter(6 in, PS_Default)/2)^2*V_SedManifoldMaxFlowDist = 4.3911 L/s
Q_Sed := Q_Train/N_SedTanks = 7.14286 L/s
L_SedActiveEst := Q_Sed/(W_Sed*V_SedUpBod) - L_SedPlateEst*sin(AN_SedPlate) = 6.17598 m
# Number of sed tanks
# Inlet manifold and launder diameters
ND_SedManifold := NominalDiameter((4/π*Q_Sed/V_SedManifoldMaxFlowDist)^(1/2), PS_Default) = 8 in
# Figure out manifold sizing
ND_SedLaunder := ND_Manifold(Q_Sed, HL_SedLaunderBod, L_SedActiveEst, Pi_QLaunderOrifices, PS_Default, Nu_Water, E_Pvc, K_PipeExit, floor(L_SedActiveEst/B_SedLaunderOrificesEst)) = 6 in
# Inlet Channel Design
L_SedChannel := N_SedTanks*(W_Sed + T_PlantWall) = 8.5176 m  # Length of the inlet channel, which runs along the entire width of the sed tanks.
HL_SedWeirExit := Headloss_weir(Q_Train, L_SedChannel) = 2.15155 cm
Pi_QSedTanks := 0.95
HL_SedInletChannelMax := (HL_SedLaunderBod + HL_SedDiffuser)*(1 - Pi_QSedTanks^2) = 0.452105 cm
HW_SedInletChannelMax := 35 cm
HW_SedInletChannelMinPlumbing := HL_SedLaunderBod + HL_SedDiffuser + 2*ConRadius(ND_SedLaunder) + S_Fitting + HL_SedWeirExit = 0.302035 m
W_SedInletChannelPreWeirMinPlumbing := 2*ConRadius(ND_SedManifold) + 2*S_Fitting = 0.336537 m
W_SedInletChannelPreWeirMinHL := W_HorizChannel(Q_Plant, HW_SedInletChannelMax, HL_SedInletChannelMax, L_SedChannel, Nu_Water, E_Pvc, 0) = 0.542699 m
W_SedInletChannelPreWeir := max(W_SedInletChannelPreWeirMinPlumbing, W_SedInletChannelPreWeirMinHL) = 0.542699 m
HW_SedInletChannelHL := H_HorizChannel(Q_Train, W_SedInletChannelPreWeir, HL_SedInletChannelMax, L_SedChannel, Nu_Water, E_Concrete, 0) = 0.367962 m
HW_SedInletChannel := max(HW_SedInletChannelMinPlumbing, HW_SedInletChannelHL) = 0.367962 m
H_SedInletChannel := HW_SedInletChannel + H_PlantFreeboard = 0.467962 m
W_SedWeirInlet := L_SedChannel = 8.5176 m
HL_SedWeirInlet := Headloss_weir(Q_Train, W_SedWeirInlet) = 2.15155 cm
H_SedWeirInlet := HW_SedInletChannel + H_SedInletWeirFreeboard = 0.387962 m  # The weir height should be set to not overflow during normal operation.
W_SedInletChannelPostWeir := max(W_ChannelMin, W_HorizChannel(Q_Train, H_SedWeirInlet, HL_ChannelMax, L_SedChannel, Nu_Water, E_Concrete, 1)) = 0.17386 m
W_SedInletChannel := W_SedInletChannelPreWeir + T_SedWeir + W_SedInletChannelPostWeir = 0.766559 m
V_SedInletChannel := Q_Train/(W_SedInletChannelPreWeir*HW_SedInletChannel) = 0.250385 m/s
# This is the velocity in the part of the channel that delivers the flocs
ND_SedInletChannelDrain := NominalDiameter(D_PipeTotal(Q_Train, HW_SedEst, HW_SedEst + W_SedInletChannel, Nu_Water, E_Pvc, K_PipeEnt + K_PipeExit + K_El90), PS_Default) = 6 in
W_SedInletChannelDrainBox := max(2*S_Fitting + 2*ConRadius(ND_SedInletChannelDrain), W_SedInletChannelPostWeir) = 0.28415 m
# Outlet Pipe to Filter
L_SedToFiPipeEst := W_DCWalkway + W_SedInletChannel + 1 m = 2.76656 m
# The extra 1 meter is for the vertical section where the pipe drops down from the sed tank exit channel.
ND_SedToFiPipeMax := 8 in
D_pipeschedule(Q, PipeSpecification, h_l, L, ν, ε, K)
Q_SedToFiPipeMax := Q_pipetotal(innerdiameter(ND_SedToFiPipeMax, PS_Default), HL_SedToFiPipeMax, L_SedToFiPipeEst, Nu_Water, E_Pvc, K_El90 + K_PipeEnt + K_PipeExit) = 27.3354 L/s
N_SedToFiPipes := ceil(Q_Train/Q_SedToFiPipeMax) = 2
Q_SedToFiPipe := Q_Train/N_SedToFiPipes = 25 L/s
ND_SedToFiPipe := D_pipeschedule(Q_SedToFiPipe, PS_Default, HL_SedToFiPipeMax, L_SedToFiPipeEst, Nu_Water, E_Pvc, K_El90 + K_PipeEnt + K_PipeExit) = 8 in
HL_FiEntrancePipe := h_l(Q_SedToFiPipe, innerdiameter(ND_SedToFiPipe, PS_Default), L_SedToFiPipeEst, K_El90 + K_PipeEnt + K_PipeExit, Nu_Water, E_Pvc) = 8.42631 cm
# Exit Channel Design
ND_SedExitChannelDrain := NominalDiameter(D_PipeTotal(Q_Train, HW_SedEst, HW_SedEst, Nu_Water, E_Pvc, K_PipeEnt + K_PipeExit + K_El90), PS_Default) = 6 in
H_SedExitChannel := H_SedInletChannel
HW_SedExitChannel := HW_SedInletChannel - HL_SedLaunderBod - HL_SedDiffuser = 0.321592 m
W_SedExitChannelPreWeir := W_ChannelMin = 0.15 m
H_SedWeirExit := HW_SedExitChannel - HL_SedWeirExit = 0.300077 m
W_SedExitChannelPostWeir := max(S_Fitting + 2*ConRadius(ND_SedToFiPipe), W_ChannelMin, W_HorizChannel(Q_Train, H_SedWeirExit, HL_ChannelMax, L_SedChannel, Nu_Water, E_Concrete, 1)) = 0.286538 m
W_SedExitChannel := W_SedExitChannelPreWeir + T_SedWeir + W_SedExitChannelPostWeir = 0.486538 m
W_SedExitChannelDrainBox := max(2*S_Fitting + 2*ConRadius(ND_SedExitChannelDrain), W_SedExitChannelPostWeir) = 0.286538 m
# Plate Settlers and Upflow Length
L_SedPlate := Ceil((S_SedPlate*(V_SedUpBod/V_SedCBod - 1) + T_SedPlate*V_SedUpBod/V_SedCBod)/(sin(AN_SedPlate)*cos(AN_SedPlate)), 10 cm) = 50 cm
N_SedPlates := CeilNearest((L_SedActiveEst*sin(AN_SedPlate) - T_SedPlate)/(S_SedPlate + T_SedPlate), PlateIndex) = 200
N_SedModPlates :=
    N ← 8
    while mod(N_SedPlates, N) ≠ 0
        N ← N + 1
    return N
N_SedModPlates =  # error: This variable is undefined.
N_SedModules := N_SedPlates/N_SedModPlates = 25
L_SedUpflow := L_SedPlate*cos(AN_SedPlate) + (N_SedPlates - 1)*B_SedPlate/sin(AN_SedPlate) + T_SedPlate/sin(AN_SedPlate) = 6.45652 m
V_SedUp := Q_Sed/(L_SedUpflow*W_Sed) = 1.03703 mm/s
# Tank and Hopper Length
L_SedHopper :=
    W_SedExitChannel + T_SedWeir + W_SedInletChannel + T_ChannelWall - T_SedWeir if Q_Train > Q_PlantMaxLF
    max(L_SedHopperMin, L_SedPlate*cos(AN_SedPlate) - T_SedWeir) otherwise
    = 1.4031 m
L_Sed := L_SedHopper + T_SedWeir + L_SedUpflow = 7.90961 m
# Inlet Manifold Design
L_FlocWeirToDiffuserGap := L_SedManConnectionStub + L_SedManFirstDiffuserGap - (B_SedDiffuser/2 - outerradius(ND_SedDiffuser)) = 5.67005 cm
L_WallToDiffuserGapMin := 3 cm
N_SedManifoldPorts := floor((L_SedUpflow - L_FlocWeirToDiffuserGap - L_WallToDiffuserGapMin)/B_SedDiffuser) = 106
L_SedManifoldPipe := L_SedUpflow - L_SedManConnectionStub - L_SedManifoldPipeFromTankEnd - CapThickness(ND_SedManifold) = 6.38778 m
Q_SedManifoldPort := Q_Sed/N_SedManifoldPorts = 0.0673854 L/s
# Exit Launder
L_SedLaunder :=
    L_SedUpflow - CapThickness(ND_SedLaunder) - max(0 m, 2*CouplingLength(ND_SedLaunder) - T_ChannelWall) if T_ChannelWall > CouplingLength(ND_SedLaunder) and Q_Train > Q_PlantMaxLF
    L_Sed - CapThickness(ND_SedLaunder) - S_Fitting - ElbowRadius(ND_SedLaunder) - ConRadius(ND_SedLaunder) if Q_Train ≤ Q_PlantMaxLF
    L_SedUpflow + T_ChannelWall - CouplingLength(ND_SedLaunder) - CapThickness(ND_SedLaunder) otherwise
    = 6.43576 m
N_SedLaunderOrificesEst := floor((L_SedLaunder - SocketDepth(ND_SedLaunder))/B_SedLaunderOrificesEst) = 63
Q_SedLaunderOrificeEst := Q_Sed/N_SedLaunderOrificesEst
# This the HL due to major & minor losses loses through the manifold.
D_SedLaunderOrifice := RoundNearest(D_circle(A_orifice(HL_SedLaunderBod, Pi_VenaContractaOrifice, Q_SedLaunderOrificeEst)), D_Drill) = 0.625 in
Q_SedLaunderOrificeTarget := Q_orifice(D_SedLaunderOrifice, HL_SedLaunderBod, Pi_VenaContractaOrifice)
B_SedLaunderOrifice := Round((L_SedLaunder - SocketDepth(ND_SedLaunder))/(Q_Sed/Q_SedLaunderOrificeTarget), 0.5 cm) = 10 cm
N_SedLaunderOrifices := floor((L_SedLaunder - SocketDepth(ND_SedLaunder))/B_SedLaunderOrifice) = 63
HL_SedLaunderMajor := HL_Manifold(Q_Sed, innerdiameter(ND_SedLaunder, PS_Default), L_SedLaunder, 0, Nu_Water, E_Pvc, N_SedLaunderOrifices) = 0.241651 cm
HL_SedLaunderOrifice := h_orifice(D_SedLaunderOrifice, Pi_VenaContractaOrifice, Q_Sed/N_SedLaunderOrifices) = 4.21499 cm
HL_SedLaunder := HL_SedLaunderOrifice + HL_SedLaunderMajor = 4.45664 cm
# Side Slopes
W_SedSideSlopes := (W_SedBay - innerdiameter(ND_SedJetReverser, PS_Default))/2 = 0.492633 m
H_SedSideSlopes := tan(AN_SedSlope)*W_SedSideSlopes = 0.587097 m
# Elevations
# [area: Elevations]
Z_SedSludgeDrain := Plant_Origin[2] - outerradius(ND_SedJetReverser) = -0.04445 m
Z_SedManifoldPipe := Z_SedSludgeDrain + H_JetReverserToDiffusers + L_SedManifoldDiffuser + innerdiameter(ND_SedManifold, PS_Default)/2 = 0.236147 m
Z_SedSideSlopes := Z_SedSludgeDrain + H_SedSideSlopes = 0.542647 m
Z_SedFlocWeir := max(Z_SedManifoldPipe + outerradius(ND_SedManifold) + T_ConcreteMin, Z_SedSideSlopes + H_SedSlopesToFlocWeirMin) = 0.692647 m
Z_SedLamellaBottom := Z_SedFlocWeir + H_FlocWeirToPlateFrame + outerdiameter(ND_SedPlateFrame) = 0.840907 m
Z_SedLamellaSupportLedge := Z_SedLamellaBottom - outerradius(ND_SedPlateFrame) - ConRadius(ND_SedPlateFrame) = 0.788202 m
Z_SedLaunder := Z_SedLamellaBottom + L_SedPlate*sin(AN_SedPlate) + 2*T_SedPlate*cos(AN_SedPlate) + H_LamellaToLaunder + outerradius(ND_SedLaunder) = 1.41006 m
Z_SedChannelBottom := Z_SedLaunder + outerradius(ND_SedLaunder) - H_SedWeirExit = 1.19412 m
Z_SedWeirExit := Z_SedChannelBottom + H_SedWeirExit = 1.49419 m
H_SedHopperFrontSlope := L_SedHopper/2*tan(AN_SedHopperSlope) = 0.701548 m
H_SedHopperBackSlope := H_SedHopperFrontSlope = 0.701548 m
Z_SedHopperBottom := Z_SedFlocWeir - H_SedHopperFrontSlope = -0.00890094 m
Z_SedHopperBackSlope := Z_SedHopperBottom + H_SedHopperBackSlope = 0.692647 m
Z_SedHopperSideSlope := Z_SedHopperBackSlope = 0.692647 m
Z_Sed :=
    Z_SedChannelBottom + H_SedInletChannel if Q_Train > Q_PlantMaxLF
    Z_SedLaunder + ConRadius(ND_SedLaunder) + HL_SedLaunderBod + H_PlantFreeboard otherwise
    = 1.66208 m
H_Sed := Z_Sed - Z_SedSludgeDrain = 1.70653 m  # Height of sed tank from the lip of the jet reverser
ZW_SedInletChannel := Z_SedChannelBottom + HW_SedInletChannel = 1.56208 m
ZW_Sed := ZW_SedInletChannel - HL_SedDiffuser = 1.55571 m
HW_Sed := ZW_Sed - Z_SedSludgeDrain = 1.60016 m
X_SedHopperBottom := -L_Sed + H_SedHopperBackSlope/tan(AN_SedHopperSlope) = -7.20806 m
Z_Walkway := Z_SedChannelBottom = 1.19412 m
# Hopper Drain
L_SedHopperDrainPipe := H_SedHopperBackSlope/tan(AN_SedHopperSlope) + T_PlantWall + SocketDepth(ND_SedHopperDrain) = 0.763537 m
# Module Design
# This part of the code serves to draw the module pipe for the plate settlers. In order to understand the meaning of each value please refer to the autocad drawing Lamina.Explanation
# This is the part of the pipe sticking out that the cap is fitted on. The cap will serve as a resting spot for the next module. The modules are identical so they can be interchangeable.
L_SedModulePipeIncrement := B_SedPlate - T_SedPlate - (CapDiameter(NominalPipeSize(ND_SedModulePipeSpacer))/2 - outerradius(NominalPipeSize(ND_SedModulePipeSpacer))) = 0.0216663 m
# This is the actual spacing between the pipes.
L_SedModulePipe := N_SedModPlates*B_SedPlate - (B_SedPlate - T_SedPlate) + 2*L_SedModulePipeIncrement = 0.234333 m  # This is the length of a sed module pipe.
# The cap should be as long as the spacing between the two modules. If it is longer, we will need to cut it accordingly.
S_SedModulePipes := max(L_SedPlate - 2*outerdiameter(ND_SedModulePipe) - 2*S_SedPlateModuleMin - (N_SedModPlates*(T_SedPlate + (B_SedPlate - T_SedPlate)) - (B_SedPlate - T_SedPlate))/tan(AN_SedPlate), (L_SedModulePipe - L_SedModulePipeIncrement)*tan(90 deg - AN_SedPlate) + CapDiameter(NominalPipeSize(ND_SedModulePipeSpacer))) = 0.307054 m
.
L_SedModulePipeCap := min(B_SedPlate - T_SedPlate, CapHeight(NominalPipeSize(ND_SedModulePipeSpacer)) - (CapDiameter(NominalPipeSize(ND_SedModulePipeSpacer))/2 - outerradius(NominalPipeSize(ND_SedModulePipeSpacer)))) = 0.025 m
# This is the new spacing between the bottom of the first plate settler in a module and the first pipe.
S_SedPlateModule := (L_SedPlate - S_SedModulePipes - (L_SedModulePipe - 2*L_SedModulePipeIncrement)/tan(AN_SedPlate))/2 = 0.041336 m
.
# Residence Time Estimate
Vol_SedActiveEst := W_Sed*L_SedUpflow*HW_Sed - W_SedSideSlopes*H_SedSideSlopes*L_SedUpflow = 9154.23 L
Ti_Sed := Vol_SedActiveEst/Q_Sed = 21.3599 min
# Inlet Manifold Air Vent
# Addition of the small holes on the top of the inlet manifold to allow air escape. Calcs by dfg42 3/18/15
A_SedAroundPipe := L_SedManifoldPipeActive*20*cm  # Conservatively assuming 10 cm around each side of pipe
V_SedUpPipeMid := Q_SedBay/A_SedAroundPipe  # Velocity of water rising around the pipe
Q_SedAirMin := V_SedUpPipeMid*L_SedManifoldPipeActive*innerdiameter(ND_SedManifold, PS_Default)
# Minimum flow rate of air out the vents
Δh_SedManifold := Z_SedLaunder - Z_SedManifoldPipe
# Pressure expressed as feet of air
D_SedAirVentEst := sqrt(4*Q_SedAirMin/(π*Pi_VenaContractaOrifice*sqrt(2*g*Δh_SedManifold)))
# Orifice equation to estimate vent size
N_SedAirVents :=
    N ← 1
    while D_SedAirVentEst^2/N > D_SedAirVentMax^2
        N ← N + 1
    return N
# Number of air vents
D_AirVentHoles := CeilNearest(D_SedAirVentEst/N_SedAirVents, D_Drill)  # Actual diamter of holes rounded to 16th of an inch (is an 8th better?)
Q_AirVent := Pi_VenaContractaOrifice*π*D_AirVentHoles^2/4*sqrt(2*g*Δh_SedManifold)  # Actual air flow out each vent
V_AirVent := Q_AirVent/(π*D_AirVentHoles^2/4)  # Actual velocity out of the air vent
