# Comments in blue are from dfg42
# Sedimentation Tank
Q_Train := □*L/s  # error: This placeholder is empty.
# design at half flow rate for plants which are "double train" i.e. over 100Lps. this applies to the sed tank, flocculator and lfom files, in the entrance tank file this returns to the design flow and then goes back to half for the srsf.
# In the sed tanks, use Q.Train instead of Q.Plant
# Preliminary Dimension and Flow Calculations
# The minimum number of sed tanks is either 1,2,or 3 for very low flow rates. Then the
#
# first take the minimum of the 1,2,3 or the min number of sed tanks.
# then take the maximum of that number and the minimum number of double bay sed tanks required assuming that we are using the maximum manifold size possible.
# The number of sed bays per tank has been updated to 1 as of 4/22/2014 (her28)
# If this was changed then I can eliminate the option of multiple bays?
Q_SedManifoldMax := Q_PipeED(ED_SedInlet, innerdiameter(ND_SedManifoldMax, PS_Default), Pi_VenaContractaOrifice, Pi_JetRound)
Q_SedManifoldMin := Q_PipeED(ED_SedInlet, innerdiameter(ND_SedManifoldMin, PS_Default), Pi_VenaContractaOrifice, Pi_JetRound)
fN_SedBays(Q_Train) := min(ceil(Q_Train/(N_SedTanksMin*Q_SedManifoldMax)), 1)
N_SedBaysEst := fN_SedBays(Q_Train)
N_SedTanks := max(min(ceil(Q_Train/Q_SedManifoldMin), N_SedTanksMin), ceil(Q_Train/(N_SedBaysPerTank*Q_SedManifoldMax)))
# Notes:
#
# 6 inch manifold is used until plant flow rate exceeds (max flow rate through 6 in pipe) x (min number of sed tanks). Then the number of sed tanks stays at min number of sed tanks (3) with one bay per tank until plant flow rate exceeds (max flow rate through 10 in pipe) x (min number of sed tanks). Then the number of sed bays per tank jumps up to 2 and the number of sed tanks stays at the min number of sed tanks until plant flow rate exceeds 2 x (max flow rate through 10 in pipe) x (min number of sed tanks). Then the number of sed bays per tank is set at 2 and the number of sed tanks is determined by rounding up Q.Plant/(2*Max flow through 10in pipe).
# Use minimum number of sed tanks and minimum pipe size if the the flow rate is less than the Q.PipeMin x N.SedTanksMin. If the flow rate exceeds this, move pipe size up. if the flow exceeds the number of Q.ManifoldMax*N.SedTanksMin, then increase the number of sed tanks by 1 until a maximum is reached. Maybe add an option for bays once this value gets too high? dfg42 2/25/15
N_SedTanksTest :=
    N_SedTanksMin if N_SedTanksMin*Q_SedManifoldMax ≥ Q_Train
    ceil(Q_Train/Q_SedManifoldMax) otherwise
# This will calculate our sed tanks to have maximum length, which i think is most economical, but maybe worth
Q_SedManifoldMax =  # error: This variable is undefined.
Q_Sed := Q_Train/N_SedTanks  # Flow rate through one sed tank.
# Maximum length of the upflow section of the sed tank is based on the maximum flow rate through the inlet manifold pipe to stay below the maximum energy dissipation rate to prevent floc breakup and the desired upflow velocity to maintain a floc blanket.
L_SedUpflowMax := Q_SedManifoldMax/(V_SedUpBod*W_SedBay)
# There is a minimum number of total sed bays required to maintain the desired upflow velocity in each sed tank given the maximum length calculated above.
N_SedBaysTotal := ceil(Q_Train/(V_SedUpBod*W_SedBay*L_SedUpflowMax))
N_SedBaysMin := ceil(N_SedBaysTotal/N_SedTanks)  # Minimum number of sed bays per sed tank given the minimum total number calculated above.
# Change to remove bays?
N_SedBays := max(N_SedBaysMin, N_SedBaysEst)  # The number of bays per tank is the maximum of the calculated value and the user input
W_Sed := N_SedBays*W_SedBay
Q_SedBay := Q_Sed/N_SedBays
Q_SedManifold := Q_SedBay  # There is one manifold per bay
ND_SedManifold := NominalDiameter(D_PipeED(ED_SedInlet, Q_SedBay, Pi_VenaContractaOrifice, Pi_JetRound), PS_Default)
L_SedUpflowEst := Q_SedBay/(W_SedBay*V_SedUpBod)
ND_SedLaunder := ND_Manifold(Q_SedBay, HL_SedLaunderBod, L_SedUpflowEst, Pi_QLaunderOrifices, PS_Default, Nu_Water, E_Pvc, K_PipeExit, 2*floor(L_SedUpflowEst/B_SedLaunderOrificesEst))
# Inlet Channel Design
L_SedChannel := N_SedTanks*W_Sed + (N_SedTanks - 1)*T_SedWallDivider + T_PlantWall - T_SedWallDivider
# Length of the inlet channel, which runs along the entire width of the sed tanks.
HL_SedWeirExit := Headloss_weir(Q_Train, L_SedChannel)
# The area of the inlet channel must be large enough not to break up flocs
A_SedInletChannelED := A_Channel(Q_Train, ED_SedInlet, Pi_VenaContractaOrifice, Pi_JetPlane)
W_SedInletChannelPlumbing := 2*ConRadius(ND_SedManifold) + 2*S_Fitting
HW_SedInletChannelPlumbing := HL_SedLaunderBod + 2*ConRadius(ND_SedLaunder) + S_Fitting + HL_SedWeirExit
W_SedInletChannelPreWeir := max(W_SedInletChannelPlumbing, sqrt(A_SedInletChannelED))
HW_SedInletChannel := max(HW_SedInletChannelPlumbing, A_SedInletChannelED/W_SedInletChannelPreWeir)
H_SedInletChannel := HW_SedInletChannel + H_PlantFreeboard
EN_InletChannelGeom :=
    hl_weir ← Headloss_weir(Q_Train, W_SedInletChannelPreWeir)
    Geom_Channel ← Perpendicular_Weir if (hl_weir ≤ HL_SedWeirMax)
    Geom_Channel ← Parallel_Weir otherwise
    return Geom_Channel
# This function determines the geometry of the weir based on the headloss through it. Hl.SedWeirMax is an expert input. 0-->Perpendicular, 1--> Parallel
W_SedWeirInlet :=
    W_SedInletChannelPreWeir if EN_InletChannelGeom == Perpendicular_Weir
    L_SedChannel otherwise
HL_SedWeirInlet := Headloss_weir(Q_Train, W_SedWeirInlet)
# The weir height should be set to not overflow during normal operation.
H_SedWeirInlet := HW_SedInletChannel + H_SedInletWeirFreeboard
W_SedInletChannelPostWeir := max(W_ChannelMin, W_HorizChannel(Q_Train, H_SedWeirInlet, HL_ChannelMax, L_SedChannel, Nu_Water, E_Concrete, 1))
W_SedInletChannel :=
    W_SedInletChannelPreWeir if EN_InletChannelGeom == Perpendicular_Weir
    W_SedInletChannelPreWeir + T_SedWeir + W_SedInletChannelPostWeir if EN_InletChannelGeom == Parallel_Weir
# This is the velocity in the part of the channel that delivers the flocs
V_SedInletChannel := Q_Train/(W_SedInletChannelPreWeir*HW_SedInletChannel)
ND_SedInletChannelDrain := NominalDiameter(D_PipeTotal(Q_Train, HW_SedEst, HW_SedEst + W_SedInletChannel, Nu_Water, E_Pvc, K_PipeEnt + K_PipeExit + K_El90), PS_Default)
W_SedInletChannelDrainBox := max(2*S_Fitting + 2*ConRadius(ND_SedInletChannelDrain), W_SedInletChannelPostWeir)
L_FiEntrancePipeEst := W_DCWalkway + W_SedInletChannel + 1 m
# The extra 1 meter is for the vertical section where the pipe drops down from the sed tank exit channel.
ND_FiEntrancePipeMax := FloorNearest(Pipesizes[index(FloorNearest(W_SedBay/2 - ConRadius(ND_SedManifold) - 2*S_Fitting, Pipesizes[:, 1]), Pipesizes[:, 1]), 0], AvailND)
# Previously the size of the filter entrance pipe was calculated based solely on Q.Train and would not calculate for higher flow rates; now the min function with the Q.PipeTotal calculation avoid that failure.
ND_FiEntrancePipe := min(D_pipeschedule(min(Q_Train, Q_pipetotal(innerdiameter(AvailND[last(AvailND)], PS_Default), HL_FiEntrancePipeMax, L_FiEntrancePipeEst, Nu_Water, E_Pvc, K_FiEntrancePipe)), PS_Default, HL_FiEntrancePipeMax, L_FiEntrancePipeEst, Nu_Water, E_Pvc, K_FiEntrancePipe), ND_FiEntrancePipeMax)
N_FiEntrancePipes := ceil(Q_Train/Q_pipetotal(innerdiameter(ND_FiEntrancePipe, PS_Default), HL_FiEntrancePipeMax, L_FiEntrancePipeEst, Nu_Water, E_Pvc, K_FiEntrancePipe))
Q_FiEntrancePipe := Q_Train/N_FiEntrancePipes = L/s
HL_FiEntrancePipe := h_l(Q_FiEntrancePipe, innerdiameter(ND_FiEntrancePipe, PS_Default), L_FiEntrancePipeEst, K_FiEntrancePipe, Nu_Water, E_Pvc)
# Outlet Pipe to Filter
# Exit Channel Design
ND_SedExitChannelDrain := NominalDiameter(D_PipeTotal(Q_Train, HW_SedEst, HW_SedEst, Nu_Water, E_Pvc, K_PipeEnt + K_PipeExit + K_El90), PS_Default)
H_SedExitChannel := H_SedInletChannel
HW_SedExitChannel := HW_SedInletChannel - HL_SedLaunderBod
W_SedExitChannelPreWeir := max(W_HorizChannel(Q_Train, HW_SedExitChannel, HL_ChannelMax, L_SedChannel, Nu_Water, E_Concrete, 1), W_ChannelMin, CapHeight(ND_SedLaunder) + 1.05*L_SedLaunderCapExcess)
W_SedExitChannelPostWeir := max(2*S_Fitting + 2*ConRadius(ND_FiEntrancePipe)*(N_FiEntrancePipes > 1), W_ChannelMin, W_HorizChannel(Q_Train, H_SedWeirInlet, HL_ChannelMax, L_SedChannel - W_SedBay/2, Nu_Water, E_Concrete, 1))
# Change W.SedBay
st587
H_SedWeirExit := HW_SedExitChannel - HL_SedWeirExit
W_SedExitChannel := W_SedExitChannelPreWeir + T_SedWeir + W_SedExitChannelPostWeir
H_ExitChannelLaunder := H_SedWeirExit - outerdiameter(ND_SedLaunder)
W_SedExitChannelDrainBox := max(2*S_Fitting + 2*ConRadius(ND_SedExitChannelDrain), W_SedExitChannelPreWeir)
# Upflow Length and Number of Plates
H_LamellaToLaunder := T_ConcreteMin + CapThickness(ND_SedLaunder)
L_SedUpflow :=
    i ← 0
    L ← 0 m
    while L < L_SedUpflowEst
        i ← i + 1
        L ← (H_SedWeirExit + T_ChannelWall - outerdiameter(ND_SedLaunder) - H_LamellaToLaunder - T_SedPlate*cos(AN_SedPlate))/tan(AN_SedPlate) + T_SedPlate/sin(AN_SedPlate) + (PlateIndex[i] - 1)*B_SedPlate/sin(AN_SedPlate) - 2*T_ConcreteMin
    return L
L_SedChannelToWall := L_SedUpflow + 2*T_ConcreteMin
N_SedPlates := round((L_SedChannelToWall - (H_SedWeirExit + T_ChannelWall - outerdiameter(ND_SedLaunder) - H_LamellaToLaunder - T_SedPlate*cos(AN_SedPlate))/tan(AN_SedPlate) - T_SedPlate/sin(AN_SedPlate))/(B_SedPlate/sin(AN_SedPlate)) + 1)
V_SedUp := Q_SedBay/(L_SedUpflow*W_SedBay)
# Plate Length
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L_SedPlateActive := (N_SedPlates - 1)*S_SedPlate/sin(AN_SedPlate)
L_SedPlateEst := (B_SedPlate*Q_SedBay/(W_SedBay*L_SedPlateActive*V_SedCBod) - S_SedPlate)/(sin(AN_SedPlate)*cos(AN_SedPlate))
N_PlatesPerSheet := floor(L_SedPlateSheet/L_SedPlateEst)
L_SedPlate := L_SedPlateSheet/N_PlatesPerSheet
L_SedPlateUnderChan := (L_SedPlate*sin(AN_SedPlate) + T_SedPlate*cos(AN_SedPlate) + H_LamellaToLaunder + outerdiameter(ND_SedLaunder) - H_SedWeirExit - T_ChannelWall)/tan(AN_SedPlate) + T_SedPlate/sin(AN_SedPlate)
V_SedActiveUp := Q_SedBay/(W_SedBay*L_SedPlateActive)
V_SedCaptureCheck := V_SedActiveUp*B_SedPlate/(L_SedPlateEst*sin(AN_SedPlate)*cos(AN_SedPlate) + S_SedPlate)
# Tank and Hopper Length
L_SedHopper :=
    (W_SedExitChannel + T_SedWeir + W_SedInletChannel + T_ChannelWall + 2*T_ConcreteMin) if Q_Train > Q_PlantMaxLF
    L_SedPlate*cos(AN_SedPlate) otherwise
L_Sed := L_SedHopper + L_SedUpflow
# Sludge Drain
# This is the initial drain rate
# The factor of two is because the flow rate decreases linearly as the tank drain (for a constant cross section tank). Thus the average drain rate is 1/2 the initial drain rate.
Q_SedSludgeDrain := (2*W_SedBay*L_SedUpflow*HW_SedEst/Ti_SludgeDrain)
N_SedSludgeOrificesEst := floor(L_SedUpflow/B_SedSludgeOrificesEst) - 1
Q_SedSludgeOrificesEst := Q_SedSludgeDrain/N_SedSludgeOrificesEst
# This is the required diameter of the sludge drain if it were circular
# To get the effective "diameter" of the sludge drain manifold (the cross section will actually be a polygon) an approximate length for the portion of the sludge drain which runs under the floc hopper is assumed to be 1m and is entered in the manifold function as if its section had inlet holes as well. Since the effect of the additional length on the calculated "diameter" is very small, the accuracy of these assumptions is not very important.
D_SedSludgeChannel := D_Manifold(Q_SedSludgeDrain, HW_SedEst, L_SedUpflow, Pi_QSludgeOrifices, Nu_Water, E_Concrete, 0, N_SedSludgeOrificesEst)
ND_SedSludgePipeMin := NominalDiameter(D_PipeTotal(Q_SedSludgeDrain, HW_SedEst/3, L_SedUpflow + L_SedHopper, Nu_Water, E_Pvc, K_PipeExit + K_GateValve), PS_Default)
# Something is wrong with these diameter functions.
ND_SedSludgePipe :=
    ND_SedSludgePipeMin if ND_SedSludgePipeMin < ND_MaxSedSludgeDrain
    ND_MaxSedSludgeDrain otherwise  # This still needs work. Is this constraint allowed? What does it mean that this is a Manifold?
HL_SedSludgeEst := (HL_Manifold(Q_SedSludgeDrain, D_SedSludgeChannel, L_SedUpflow + L_SedHopper, 0, Nu_Water, E_Concrete, N_SedSludgeOrificesEst) + h_l(Q_SedSludgeDrain, innerdiameter(ND_SedSludgePipe, PS_Default), L_SedHopper + ValveLength(ND_SedSludgePipe) + 10 cm, K_GateValve + K_PipeExit, Nu_Water, E_Pvc))
# old calculation of HL sedsludgeest
HL_Manifold(Q_SedSludgeDrain, D_SedSludgeChannel, L_SedUpflow + L_SedHopper, 0, Nu_Water, E_Concrete, N_SedSludgeOrificesEst) =  # error
HL_SedSludgeOrificeEst := HW_SedEst - HL_SedSludgeEst
# The cross sectional area of the drain if it were circular
A_SedSludge := π/4*D_SedSludgeChannel^2
# Assume sludge drain square to keep width of sludge drain cover narrow
W_SedSludge := sqrt(A_SedSludge)
H_SedSludge := (A_SedSludge/W_SedSludge)  # This is the height of the sludge drain channel
# Elevation of the top of the sludge drain channel (and the bottom of the drain cover).
DropSedBottom := T_PlantWall - T_SedTankBottomSlab + ConRadius(ND_SedSludgePipe)
T_SedTankBottomSlab =  # error
T_FlocSlab := □  # error: This placeholder is empty.
T_PlantWall =  # error
# Sludge Drain Cover
# This is the width of the jet of water leaving the diffuser pipes.
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W_SedDiffuserOutlet := ((Pi_JetPlane*W_SedBay*V_SedUpBod)^3/ED_SedInlet)^(1/4)
# The jet reverser is the semi-circular trough in the center of the drain cover into which the jets from the inlet manifold discharge and re-suspend sludge. The concrete semi-circle will be cast using a length of PVC pipe.
#
# Jet reverser diameter should be at least 2x the width of the diffuser port
W_SedDiffuserOutlet =  # error
ND_SedDiffuser =  # error
ND_SedJetReverser =  # error
S_ReversedHalfJet := (outerdiameter(ND_SedJetReverser) - W_SedDiffuserOutlet)/2 - (outerradius(ND_SedDiffuser) - innerdiameter(ND_SedDiffuser, PS_Default)/2)
# This is the space between the lip of the jet reverser and the outer wall of the diffuser pipe through which the reversed jet must pass. Compare with the natural width of the reversed jet calculated next.
W_SedJet := W_SedDiffuserOutlet/2*Pi_VenaContractaOrifice^2
T_SedDrainCoverLedge := max(2 cm, outerradius(ND_SedJetReverser) - W_SedSludge/2)
W_SedDrainCover := max(W_SedSludge + 2*T_SedDrainCoverLedge, outerdiameter(ND_SedJetReverser))
# The drain cover needs to be wide enough to rest on the ledges of the drain channel, and also needs to be at least as wide as the jet reverser.
L_SedDrainCoverSlopes := (W_SedDrainCover - outerdiameter(ND_SedJetReverser))/2
# old calculation of L.SedDrainCoverSlopes
max(W_SedSludge + 2*T_SedDrainCoverLedge, outerdiameter(ND_SedJetReverser)) =  # error
H_SedDrainCoverTotal := outerradius(ND_SedJetReverser) + L_SedDrainCoverSlopes*tan(AN_SedSlope)
A_SedDrainCover := H_SedDrainCoverTotal*W_SedDrainCover - L_SedDrainCoverSlopes*tan(AN_SedSlope)*(2*L_SedDrainCoverSlopes + outerdiameter(ND_SedJetReverser)) - 1/2*π*outerradius(ND_SedJetReverser)^2
L_SedDrainCoverTotal :=
    L_Sed - L_SedHopper if Q_Train > Q_PlantMaxLF
    L_Sed - L_SedHopper - T_ConcreteMin otherwise
# L.SedDraincoverSegment should be modified so it is an integer number of manifold ports long.
L_SedDrainCoverSegmentMax := M_DrainCoverMax/(A_SedDrainCover*ρ_Concrete)
N_SedDrainCover := ceil(L_SedDrainCoverTotal/L_SedDrainCoverSegmentMax)
L_SedDrainCoverSegment := L_SedDrainCoverTotal/N_SedDrainCover - S_SedDrainCoverSegment
B_SedSludgeOrifices := L_SedDrainCoverSegment/trunc(L_SedDrainCoverSegment/B_SedSludgeOrificesEst)
# put an integer number of orifices in each drain cover segment
N_SedSludgeOrifices := floor(L_SedDrainCoverTotal/B_SedSludgeOrifices)
# No need to round this because they don't drill this hole in concrete!
D_SedSludgeOrifice := D_circle(A_orifice(HL_SedSludgeOrificeEst, Pi_VenaContractaOrifice, Q_SedSludgeDrain/N_SedSludgeOrifices))
N_SedDrainCoverSegmentOrifices := floor(N_SedSludgeOrifices/N_SedDrainCover)
# Inlet Manifold Design
L_SedManifoldPipeActive := L_SedUpflow - L_SedManifoldPipeFromFlocWeir - L_SedManifoldPipeFromTankEnd - CapThickness(ND_SedManifold)
# Length of the active part of the manifold (inside the sed tank itself) Changed on 3/23/15 by dfg42
L_SedManifoldPipe := L_Sed - CapThickness(ND_SedManifold) - S_Fitting - ConRadius(ND_SedManifold) - ElbowRadius(ND_SedManifold)
# Total Length of the Manifold Pipe
# Removed calcs of 4 variables that were already calculated in SedTankFunctions File: OD.Diffuser Circ.SedDiffuser, T.SedDiffuserWall, L.SedDiffuserOutlet, B.SedManifoldPort
#
# dfg42 3/27/15
# The width of the diffuser outlet is independent of the port spacing and thus can be calculated based on the flow per unit length of the diffuser pipe. There is a tiny inconsequential error introduced by the fact that the actual length of the slot is ultimately determined by an integer number of ports. It isn't worth correcting for that tiny error.
B_SedManifoldPort =  # error  # based on the mold
# Ratio of the perimeter of the stretched opening of the
# diffuser to the original circumference?
Pi_SedDiffuserStretch := 2*(B_SedManifoldPort - 2*T_SedDiffuserWall + W_SedDiffuserOutlet)/Circ_SedDiffuser
L_SedDiffuserOutlet =  # error
# Length of the diffuser outlet excluding walls
# Number of manifold ports 3/23/15 dfg42
N_SedManifoldPorts := floor((L_SedManifoldPipeActive - S_Fitting - L_SedDiffusersToEnd)/B_SedManifoldPort)
# Flow through each port
Q_SedManifoldPort := Q_SedBay/N_SedManifoldPorts = L/s
D_Drill :=
    D_Drill ← D_DrillEng if EN_DrillSeries == 0
    D_Drill ← D_DrillMet otherwise  # Selects the proper drill series  # series of the proper drill to use (english or metric)
D_SedManifoldPort := CeilNearest(D_PipeED(ED_SedInlet, Q_SedManifoldPort, Pi_VenaContractaOrifice, Pi_JetRound), D_Drill)
# Calculates the actual diameter of the manifold ports
# We need enough length to give the jet that is coming out of the manifold port to expand to the size of the rectangular slot
V_SedManifoldPort := Q_SedManifoldPort/(π*D_SedManifoldPort^2/4)*1/Pi_VenaContractaOrifice  # Velocity of flow through each port
V_SedDiffuser := Q_SedManifoldPort/(B_SedManifoldPort*W_SedDiffuserOutlet)
# Velocity through each diffuser
V_SedManifoldPort/V_SedDiffuser =  # error
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L_SedDiffuserRoundjetanalogy := 6.2*V_SedManifoldPort/V_SedDiffuser*D_SedManifoldPort*sqrt(Pi_VenaContractaOrifice)  # round jet equation
# Length of the jet using round jet
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L_SedDiffuserPlanejetanalogy := (2.41*V_SedManifoldPort/V_SedDiffuser)^2*D_SedManifoldPort*sqrt(Pi_VenaContractaOrifice)  # plane jet
# Length of jet if using plane jet
L_SedManifoldDiffuser := max(L_SedDiffuserPlanejetanalogy, L_SedDiffuserRoundjetanalogy)  # Length of each diffuser
# Conclusion is that we should keep the manifold as high as possible based on the limitations of the elbow to give as much distance as possible for the jet to expand inside the diffuser pipe.
# this variable needs to be set
# mrf222 7/23/14
# We should only have one set of feet; at the opposite end of the sed tank from the floc weir
N_ManifoldFeetSets := 2
# Side Slopes
W_SedSideSlopes := (W_SedBay - outerradius(ND_SedJetReverser))/2
H_SedSideSlopes := tan(AN_SedSlope)*W_SedSideSlopes
# Elevations
# [area: Elevations]
H_JetReverserToDiffusers := 3 cm
Z_SedSludge := H_SedSludge - DropSedBottom
# This is the elevation of the Manifold pipe
Z_SedManifoldPipe := Plant_Origin[2] + Z_SedSludge + H_JetReverserToDiffusers + outerradius(ND_SedJetReverser) + L_SedManifoldDiffuser + innerdiameter(ND_SedManifold, PS_Default)/2
Z_SedSideSlopes := Z_SedSludge + outerradius(ND_SedJetReverser) + H_SedSideSlopes  # Elevation of the top of the side sed tank slopes
Z_SedFlocWeir :=
    max(Z_SedManifoldPipe + outerradius(ND_SedManifold) + T_ConcreteMin, Z_SedSideSlopes + H_SedSlopesToFlocWeirMin) if Q_Train > Q_PlantMaxLF
    Z_SedSideSlopes + H_SedSlopesToFlocWeirMin otherwise  # Elevation of the top of the floc weir
Z_SedLamellaBottomMin := Z_SedFlocWeir + H_FlocWeirToLamellaMin  # Minimum elevation of the bottom of the plate settlers
Z_SedLaunderMin := Z_SedLamellaBottomMin + (L_SedPlate + T_SedPlate)*sin(AN_SedPlate) + T_ConcreteMin + ConRadius(ND_SedLaunder)
# Minimum elevation of the sed launder
Z_SedChannelBottom := Z_SedLaunderMin + ConRadius(ND_SedLaunder) - H_SedWeirExit  # Elevation of the sed channel bottom
# This should be deleted, it is a left over from the code where the pipe had a 45 degree elbow. Before deleting look through drawing file to make sure it wont screw everything up. dfg42
# 3/11/15-Removed calculations for angled
# manifold inlet (2 45 degree elbows plus angled
# pipe). Not sure if we should keep and change
# EN.SedChannelCoupling, it seems like this could
# still be used but all inputs are from the 45
# degree variables, its also still referenced in the
# drawing file-dfg42
EN_SedChannelCoupling := 1 = 1
Z_SedLaunder :=
    Z_SedChannelBottom + H_SedWeirExit - ConRadius(ND_SedLaunder) if Q_Train > Q_PlantMaxLF
    Z_SedLaunderMin otherwise  # this is the max height you can get without a coupling  # This is the elevation of the Sed launder
Z_SedLamellaBottom := Z_SedLaunder - ((L_SedPlate + T_SedPlate)*sin(AN_SedPlate) + T_ConcreteMin + ConRadius(ND_SedLaunder))
# The elevation of the bottom of the plate settlers
Z_SedWeirExit := Z_SedChannelBottom + H_SedWeirExit
# All of these elevations already have DropSedBottom subtracted from them... So ADD DropSedBottom back in
Z_SedHopperBottom := Z_SedSludge + DropSedBottom + T_ConcreteMin + S_Fitting  # Z.SedSludge is used here
H_SedHopperBackSlope := Z_SedFlocWeir + DropSedBottom - Z_SedHopperBottom
Z_SedHopperBackSlope := Z_SedHopperBottom + H_SedHopperBackSlope
Z_SedHopperFrontSlope := Z_SedManifoldPipe
Z_SedHopperIntersect := Z_SedHopperFrontSlope
# Floc Weir, Hopper, Hopper Drain, and Tank Height
H_SedFlocWeir := Z_SedFlocWeir - Z_SedSludge  # Here Z.SedSludge, which has DropSedBottom subtracted from it, is used.
ELE
H_SedHopperBackSlope == (L_SedHopperBackSlope*tan(AN_SedHopperSlope))
H_SedHopperFrontSlopeMax == Z_SedManifoldPipe - Z_SedHopperBottom
H_Sed :=
    Z_SedChannelBottom + H_SedInletChannel if Q_Train > Q_PlantMaxLF
    Z_SedLaunder + ConRadius(ND_SedLaunder) + H_PlantFreeboard otherwise
# which makes this elevation NEGATIVE
L_SedHopperFrontSlopeMax == H_SedHopperFrontSlopeMax/tan(AN_SedHopperSlope)
# Back slope will be flat if L_SedHopperFrontSlopeMax + L_SedHopperBackSlope < L_SedHopper - T_ConcreteMin
L_SedHopperBackSlope := H_SedHopperBackSlope/tan(AN_SedHopperSlope)
# CHECK ME:
H_SedHopperFrontSlope == {
    H_SedHopperFrontSlopeMax if L_SedHopperFrontSlopeMax + L_SedHopperBackSlope ≥ L_SedHopper - T_ConcreteMin
    (0 m) otherwise
}
MustBePos := L_SedHopper - T_ConcreteMin - ((Z_SedManifoldPipe - Z_SedHopperBottom + H_SedHopperBackSlope)/tan(AN_SedHopperSlope))
# If this is negative, then use these instead...
L_SedHopperFrontSlope == {
    (L_SedHopper - T_ConcreteMin - L_SedHopperBackSlope) if L_SedHopperFrontSlopeMax + L_SedHopperBackSlope < L_SedHopper - T_ConcreteMin
    H_SedHopperFrontSlope/tan(AN_SedHopperSlope) otherwise
}
# This condition is in the SedTank Drawing file, currently always TRUE. Why is is flat sometimes and sloped other times? Changed to always make it PEAKED.
H_SedHopperFrontSlope := Z_SedManifoldPipe - Z_SedHopperBottom
hola := 4
Z_SedHopperIntersect == {
    Z_SedHopperFrontSlope if L_SedHopperFrontSlopeMax + L_SedHopperBackSlope < L_SedHopper - T_ConcreteMin
    (((L_SedHopperBackSlope - (L_SedHopper - T_ConcreteMin - L_SedHopperFrontSlope))/2)*tan(AN_SedHopperSlope) + Z_SedHopperBottom) otherwise
}  # ELEVATION HERE
X_SedHopperBottom := Plant_Origin[0] - L_Sed + H_SedHopperBackSlope/tan(AN_SedHopperSlope)
X_SedHopperBottom == {
    (Plant_Origin[0] - L_Sed + L_SedHopperBackSlope - ((L_SedHopperBackSlope - (L_SedHopper - T_ConcreteMin - L_SedHopperFrontSlope))/2)) if (Z_SedManifoldPipe - Z_SedHopperBottom)/tan(AN_SedHopperSlope) + H_SedHopperBackSlope/tan(AN_SedHopperSlope) ≥ L_SedHopper - T_ConcreteMin
    (Plant_Origin[0] - L_Sed + L_SedHopperBackSlope) otherwise
}
B_SedLaunderOrifices := B_SedLaunderOrificesEst
L_SedLaunder :=
    L_SedChannelToWall - CapThickness(ND_SedLaunder) if T_ChannelWall > 2*CouplingLength(ND_SedLaunder) and Q_Train > Q_PlantMaxLF
    L_SedChannelToWall + T_ChannelWall - 2*CouplingLength(ND_SedLaunder) - CapThickness(ND_SedLaunder) if CouplingLength(ND_SedLaunder) < T_ChannelWall < 2*CouplingLength(ND_SedLaunder) and Q_Train > Q_PlantMaxLF
    L_Sed - CapThickness(ND_SedLaunder) - S_Fitting - ElbowRadius(ND_SedLaunder) - ConRadius(ND_SedLaunder) if Q_Train ≤ Q_PlantMaxLF
    L_SedChannelToWall + T_ChannelWall - CouplingLength(ND_SedLaunder) - CapThickness(ND_SedLaunder) otherwise
N_SedLaunderOrifices := floor((L_SedLaunder - CapHeight(ND_SedLaunder) + CapThickness(ND_SedLaunder) - SocketDepth(ND_SedLaunder))/B_SedLaunderOrifices)
Q_SedLaunderOrifices := Q_SedBay/N_SedLaunderOrifices
# This the HL due to major & minor losses loses through the manifold.
HL_SedLaunderMajor := HL_Manifold(Q_SedBay, innerdiameter(ND_SedLaunder, PS_Default), L_SedLaunder, 0, Nu_Water, E_Pvc, N_SedLaunderOrifices)
HL_SedLaunderOrificeEst := HL_SedLaunderBod - HL_SedLaunderMajor
D_SedLaunderOrifice := RoundNearest(D_circle(A_orifice(HL_SedLaunderOrificeEst, Pi_VenaContractaOrifice, Q_SedLaunderOrifices)), D_Drill)
# This is the total headloss through the launder based on the actual diameter of the orifices
HL_SedLaunderOrifice := h_orifice(D_SedLaunderOrifice, Pi_VenaContractaOrifice, Q_SedLaunderOrifices)
HW_Sed :=
    Z_SedChannelBottom + HW_SedExitChannel + HL_SedLaunderBod if Q_Train > Q_PlantMaxLF
    Z_SedLaunder + HL_SedLaunderBod otherwise
# Exit Launder
Q_SedHopperDrainMax := Q_pipetotal(innerdiameter(ND_SedHopperDrain, PS_Default), HW_Sed - Z_SedHopperBottom, H_SedHopperBackSlope/tan(AN_SedHopperSlope) + max(CouplingLength(ND_SedHopperDrain), T_PlantWall) + ValveLength(ND_SedHopperDrain) + π/4*ElbowRadius(ND_SedHopperDrain), Nu_Water, E_Pvc, K_PipeEnt + K_PipeExit + K_GateValve) = L/s
L_SedHopperDrainPipe := H_SedHopperBackSlope/tan(AN_SedHopperSlope) + T_PlantWall - CouplingLength(ND_SedHopperDrain) + 2*SocketDepth(ND_SedHopperDrain)
# Hopper Drain
# Module Design
N_SedPlates =  # error
L_SedPlate =  # error
N_SedModules :=
    for i ∈ N_SedModulePlatesMin .. N_SedModulePlatesMax
        N ← N_SedPlates/i
        break if mod(N_SedPlates, i) == 0
    return N
N_SedModulePlates := N_SedPlates/N_SedModules
# This part of the code serves to draw the module pipe for the plate settlers. In order to understand the meaning of each value please refer to the autocad drawing Lamina.Explanation
# This is the part of the pipe sticking out that the cap is fitted on. The cap will serve as a resting spot for the next module. The modules are identical so they can be interchangeable.
L_SedModulePipeIncrement := B_SedPlate - T_SedPlate - (CapDiameter(NominalPipeSize(ND_SedModulePipeSpacer))/2 - outerradius(NominalPipeSize(ND_SedModulePipeSpacer)))
# This is the actual spacing between the pipes.
L_SedModulePipe := N_SedModulePlates*B_SedPlate - (B_SedPlate - T_SedPlate) + 2*L_SedModulePipeIncrement  # This is the length of a sed module pipe.
# The cap should be as long as the spacing between the two modules. If it is longer, we will need to cut it accordingly.
S_SedModulePipes := max(L_SedPlate - 2*outerdiameter(ND_SedModulePipe) - 2*S_SedPlateModuleMin - (N_SedModulePlates*(T_SedPlate + (B_SedPlate - T_SedPlate)) - (B_SedPlate - T_SedPlate))/tan(AN_SedPlate), (L_SedModulePipe - L_SedModulePipeIncrement)*tan(90 deg - AN_SedPlate) + CapDiameter(NominalPipeSize(ND_SedModulePipeSpacer)))
.
L_SedModulePipeCap := min(B_SedPlate - T_SedPlate, CapHeight(NominalPipeSize(ND_SedModulePipeSpacer)) - (CapDiameter(NominalPipeSize(ND_SedModulePipeSpacer))/2 - outerradius(NominalPipeSize(ND_SedModulePipeSpacer))))
S_SedPlateModule := (L_SedPlate - S_SedModulePipes - (L_SedModulePipe - 2*L_SedModulePipeIncrement)/tan(AN_SedPlate))/2
# This is the new spacing between the bottom of the first plate settler in a module and the first pipe.
.
L_SedActive := N_SedPlates*B_SedPlate/sin(AN_SedPlate) - T_SedPlate/sin(AN_SedPlate)
H_SedFrameStub := ((B_SedPlate - T_SedPlate)/sin(AN_SedPlate) - outerdiameter(ND_SedFrameStub))*tan(AN_SedPlate)
B_SedFrameStub := B_SedPlate/sin(AN_SedPlate)*N_SedModulePlates
# Plate Pipe Frame (not currently used)
Vol_SedManifoldEst := (L_SedManifoldPipe + π/4*ElbowRadius(ND_SedManifold) + Z_SedChannelBottom - T_ChannelWall - Z_SedManifoldPipe - ElbowRadius(ND_SedManifold))*π*outerradius(ND_SedManifold)^2
Vol_SedPlatesEst := N_SedPlates*L_SedPlate*W_SedPlate*T_SedPlate
Vol_SedChannelsEst := W_SedBay*(W_SedInletChannel + T_ChannelWall)*(H_SedInletChannel + T_ChannelWall) + W_SedBay*(W_SedExitChannel + T_ChannelWall)*(H_SedExitChannel + T_ChannelWall)
Vol_SedBayEst := W_SedBay*L_Sed*HW_Sed - 1/2*L_SedHopper*H_SedHopperFrontSlope*W_SedBay - W_SedSideSlopes*H_SedSideSlopes*L_SedUpflow - Vol_SedManifoldEst - Vol_SedPlatesEst - Vol_SedChannelsEst
Ti_Sed := Vol_SedBayEst/Q_SedBay
# Residence Time Estimate
# Inlet Manifold Air Vent
# Addition of the small holes on the top of the inlet manifold to allow air escape. Calcs by dfg42 3/18/15
A_SedAroundPipe := L_SedManifoldPipeActive*20*cm  # Conservatively assuming 10 cm around each side of pipe
V_SedUpPipeMid := Q_SedBay/A_SedAroundPipe  # Velocity of water rising around the pipe
Q_SedAirMin := V_SedUpPipeMid*L_SedManifoldPipeActive*innerdiameter(ND_SedManifold, PS_Default)
# Minimum flow rate of air out the vents
Δh_SedManifold := Z_SedLaunder - Z_SedManifoldPipe
# Pressure expressed as feet of air
D_SedAirVentEst := sqrt(4*Q_SedAirMin/(π*Pi_VenaContractaOrifice*sqrt(2*g*Δh_SedManifold)))
# Orifice equation to estimate vent size
N_SedAirVents :=
    N ← 1
    while D_SedAirVentEst^2/N > D_SedAirVentMax^2
        N ← N + 1
    return N
# Number of air vents
D_AirVentHoles := CeilNearest(D_SedAirVentEst/N_SedAirVents, D_Drill)  # Actual diamter of holes rounded to 16th of an inch (is an 8th better?)
Q_AirVent := Pi_VenaContractaOrifice*π*D_AirVentHoles^2/4*sqrt(2*g*Δh_SedManifold)  # Actual air flow out each vent
V_AirVent := Q_AirVent/(π*D_AirVentHoles^2/4)  # Actual velocity out of the air vent
H_WalkwayToTankWall := H_SedInletChannel
Z_Walkway := Plant_Origin[0] + H_Sed - H_WalkwayToTankWall
