Q_Plant := 50*L/s
Mod := 0
# [reference: ExpertInputs.xmcd]
# [reference: MathFunctions.xmcd]
# [reference: PipeDatabase.xmcd]
# [reference: MaterialsDatabase.xmcd]
# [reference: FluidsFunctions.xmcd]
# [reference: SedTankFunctions.xmcd]
# [reference: CdcFunctions.xmcd]
# [reference: LfomFunctions.xmcd]
# Sedimentation Tank
Q_Plant :=
    Q_Train if EN_DoubleTrain == 1
    Q_Plant otherwise
# design at half flow rate for plants which are "double train" i.e. over 100Lps. this applies to the sed tank, flocculator and lfom files, in the entrance tank file this returns to the design flow and then goes back to half for the srsf.
# Preliminary Dimension and Flow Calculations
# The minimum number of sed tanks is either 1,2,or 3 for very low flow rates. Then the
#
# first take the minimum of the 1,2,3 or the min number of sed tanks.
# then take the maximum of that number and the minimum number of double bay sed tanks required assuming that we are using the maximum manifold size possible.
# The number of sed bays per tank has been updated to 1 as of 4/22/2014 (her28)
Q_SedManifoldMax := Q_PipeED(ED_SedInlet, innerdiameter(ND_SedManifoldMax, PS_Default), Pi_VenaContractaOrifice, Pi_JetRound) = 0.00844111 m^3/s
Q_SedManifoldMin := Q_PipeED(ED_SedInlet, innerdiameter(ND_SedManifoldMin, PS_Default), Pi_VenaContractaOrifice, Pi_JetRound) = 0.00455884 m^3/s
fN_SedBays(Q_Plant) := min(ceil(Q_Plant/(N_SedTanksMin*Q_SedManifoldMax)), 1)
N_SedBaysEst := fN_SedBays(Q_Plant) = 1
N_SedTanks := max(min(ceil(Q_Plant/Q_SedManifoldMin), N_SedTanksMin), ceil(Q_Plant/(N_SedBaysPerTank*Q_SedManifoldMax))) = 6
# Notes:
#
# 6 inch manifold is used until plant flow rate exceeds (max flow rate through 6 in pipe) x (min number of sed tanks). Then the number of sed tanks stays at min number of sed tanks (3) with one bay per tank until plant flow rate exceeds (max flow rate through 10 in pipe) x (min number of sed tanks). Then the number of sed bays per tank jumps up to 2 and the number of sed tanks stays at the min number of sed tanks until plant flow rate exceeds 2 x (max flow rate through 10 in pipe) x (min number of sed tanks). Then the number of sed bays per tank is set at 2 and the number of sed tanks is determined by rounding up Q.Plant/(2*Max flow through 10in pipe).
# Maximum length of the upflow section of the sed tank is based on the maximum flow rate through the inlet manifold pipe to stay below the maximum energy dissipation rate to prevent floc breakup and the desired upflow velocity to maintain a floc blanket.
Q_SedManifoldMax = 0.00844111 m^3/s
Q_Sed := Q_Plant/N_SedTanks = 0.00833333 m^3/s  # Flow rate through one sed tank.
L_SedUpflowMax := Q_SedManifoldMax/(V_SedUpBod*W_SedBay) = 7.91255 m
N_SedBaysTotal := ceil(Q_Plant/(V_SedUpBod*W_SedBay*L_SedUpflowMax)) = 6
# There is a minimum number of total sed bays required to maintain the desired upflow velocity in each sed tank given the maximum length calculated above.
# Minimum number of sed bays per sed tank given the minimum total number calculated above.
N_SedBaysMin := ceil(N_SedBaysTotal/N_SedTanks) = 1
# The number of bays per tank is the maximum of the calculated value and the user input
N_SedBays := max(N_SedBaysMin, N_SedBaysEst) = 1
W_Sed := N_SedBays*W_SedBay = 1.0668 m
Q_SedBay := Q_Sed/N_SedBays = 0.00833333 m^3/s
Q_SedManifold := Q_SedBay  # There is one manifold per bay
ND_SedManifold := NominalDiameter(D_PipeED(ED_SedInlet, Q_SedBay, Pi_VenaContractaOrifice, Pi_JetRound), PS_Default) = 0.2032 m
L_SedUpflowEst := Q_SedBay/(W_SedBay*V_SedUpBod) = 7.81152 m
ND_SedLaunder := ND_Manifold(Q_SedBay, HL_SedLaunderBod, L_SedUpflowEst, Pi_QLaunderOrifices, PS_Default, Nu_Water, E_Pvc, K_PipeExit, 2*floor(L_SedUpflowEst/B_SedLaunderOrificesEst)) = 0.2032 m
# Inlet Channel Design
# This needs to be sloped!
L_SedChannel := N_SedTanks*W_Sed + (N_SedTanks - 1)*T_SedWallDivider + T_PlantWall - T_SedWallDivider = 7.1508 m
# Length of the inlet channel, which runs along the entire width of the sed tanks.
HL_SedWeirExit := Headloss_weir(Q_Plant, L_SedChannel) = 2.41765 cm
# The area of the inlet channel must be large enough not to break up flocs
A_SedInletChannelED := A_Channel(Q_Plant, ED_SedInlet, Pi_VenaContractaOrifice, Pi_JetPlane) = 0.0986263 m^2
W_SedInletChannelPlumbing := 2*ConRadius(ND_SedManifold) + 2*S_Fitting = 0.336537 m
HW_SedInletChannelPlumbing := HL_SedLaunderBod + 2*ConRadius(ND_SedLaunder) + S_Fitting + HL_SedWeirExit = 0.350714 m
W_SedInletChannelPreWeir := max(W_SedInletChannelPlumbing, sqrt(A_SedInletChannelED)) = 0.336537 m
HW_SedInletChannel := max(HW_SedInletChannelPlumbing, A_SedInletChannelED/W_SedInletChannelPreWeir) = 0.350714 m
H_SedInletChannel := HW_SedInletChannel + H_PlantFreeboard = 0.450714 m
EN_InletChannelGeom :=
    hl_weir ← Headloss_weir(Q_Plant, W_SedInletChannelPreWeir)
    Geom_Channel ← Perpendicular_Weir if (hl_weir ≤ HL_SedWeirMax)
    Geom_Channel ← Parallel_Weir otherwise
    return Geom_Channel
    = 1
# This function determines the geometry of the weir based on the headloss through it. Hl.SedWeirMax is an expert input. 0-->Perpendicular, 1--> Parallel
W_SedWeirInlet :=
    W_SedInletChannelPreWeir if EN_InletChannelGeom == Perpendicular_Weir
    L_SedChannel otherwise
    = 7.1508 m
HL_SedWeirInlet := Headloss_weir(Q_Plant, W_SedWeirInlet) = 0.0241765 m
# The weir height should be set to not overflow during normal operation.
H_SedWeirInlet := HW_SedInletChannel + H_SedInletWeirFreeboard = 0.370714 m
W_SedInletChannelPostWeir := max(W_ChannelMin, W_HorizChannel(Q_Plant, H_SedWeirInlet, HL_ChannelMax, L_SedChannel, Nu_Water, E_Concrete, 1)) = 0.179001 m
W_SedInletChannel :=
    W_SedInletChannelPreWeir if EN_InletChannelGeom == Perpendicular_Weir
    W_SedInletChannelPreWeir + T_SedWeir + W_SedInletChannelPostWeir if EN_InletChannelGeom == Parallel_Weir
    = 0.555539 m
# This is the velocity in the part of the channel that delivers the flocs
V_SedInletChannel := Q_Plant/(W_SedInletChannelPreWeir*HW_SedInletChannel) = 0.423627 m/s
ND_SedInletChannelDrain := NominalDiameter(D_PipeTotal(Q_Plant, HW_SedEst, HW_SedEst + W_SedInletChannel, Nu_Water, E_Pvc, K_PipeEnt + K_PipeExit + K_El90), PS_Default) = 6 in
W_SedInletChannelDrainBox := max(2*S_Fitting + 2*ConRadius(ND_SedInletChannelDrain), W_SedInletChannelPostWeir) = 0.28415 m
# Outlet Pipe to Filter
L_FiEntrancePipeEst := W_DCWalkway + W_SedInletChannel + 1 m = 2.55554 m
# The extra 1 meter is for the vertical section where the pipe drops down from the sed tank exit channel.
ND_FiEntrancePipeMax := FloorNearest(Pipesizes[index(FloorNearest(W_SedBay/2 - ConRadius(ND_SedManifold) - 2*S_Fitting, Pipesizes[:, 1]), Pipesizes[:, 1]), 0], AvailND) = 8 in
# Previously the size of the filter entrance pipe was calculated based solely on Q.Plant and would not calculate for higher flow rates; now the min function with the Q.PipeTotal calculation avoid that failure.
ND_FiEntrancePipe := min(D_pipeschedule(min(Q_Plant, Q_pipetotal(innerdiameter(AvailND[last(AvailND)], PS_Default), HL_FiEntrancePipeMax, L_FiEntrancePipeEst, Nu_Water, E_Pvc, K_FiEntrancePipe)), PS_Default, HL_FiEntrancePipeMax, L_FiEntrancePipeEst, Nu_Water, E_Pvc, K_FiEntrancePipe), ND_FiEntrancePipeMax) = 8 in
N_FiEntrancePipes := ceil(Q_Plant/Q_pipetotal(innerdiameter(ND_FiEntrancePipe, PS_Default), HL_FiEntrancePipeMax, L_FiEntrancePipeEst, Nu_Water, E_Pvc, K_FiEntrancePipe)) = 2
Q_FiEntrancePipe := Q_Plant/N_FiEntrancePipes = 25 L/s
HL_FiEntrancePipe := h_l(Q_FiEntrancePipe, innerdiameter(ND_FiEntrancePipe, PS_Default), L_FiEntrancePipeEst, K_FiEntrancePipe, Nu_Water, E_Pvc) = 8.36074 cm
# Exit Channel Design
ND_SedExitChannelDrain := NominalDiameter(D_PipeTotal(Q_Plant, HW_SedEst, HW_SedEst, Nu_Water, E_Pvc, K_PipeEnt + K_PipeExit + K_El90), PS_Default) = 6 in
H_SedExitChannel := H_SedInletChannel
HW_SedExitChannel := HW_SedInletChannel - HL_SedLaunderBod = 0.310714 m
W_SedExitChannelPreWeir := max(W_HorizChannel(Q_Plant, HW_SedExitChannel, HL_ChannelMax, L_SedChannel, Nu_Water, E_Concrete, 1), W_ChannelMin, CapHeight(ND_SedLaunder) + 1.05*L_SedLaunderCapExcess) = 0.21736 m
W_SedExitChannelPostWeir := max(2*ConRadius(ND_FiEntrancePipe)*(N_FiEntrancePipes > 1), W_ChannelMin, W_HorizChannel(Q_Plant, H_SedWeirInlet, HL_ChannelMax, L_SedChannel - W_SedBay/2, Nu_Water, E_Concrete, 1)) = 0.236537 m
H_SedWeirExit := HW_SedExitChannel - HL_SedWeirExit = 0.286538 m
W_SedExitChannel := W_SedExitChannelPreWeir + T_SedWeir + W_SedExitChannelPostWeir = 0.493897 m
H_ExitChannelLaunder := H_SedWeirExit - outerdiameter(ND_SedLaunder) = 0.0674625 m
W_SedExitChannelDrainBox := max(2*S_Fitting + 2*ConRadius(ND_SedExitChannelDrain), W_SedExitChannelPreWeir) = 0.28415 m
# Upflow Length and Number of Plates
H_LamellaToLaunder := T_ConcreteMin + CapThickness(ND_SedLaunder) = 0.0587312 m
L_SedUpflow :=
    i ← 0
    L ← 0 m
    while L < L_SedUpflowEst
        i ← i + 1
        L ← (H_SedWeirExit + T_ChannelWall - outerdiameter(ND_SedLaunder) - H_LamellaToLaunder - T_SedPlate*cos(AN_SedPlate))/tan(AN_SedPlate) + T_SedPlate/sin(AN_SedPlate) + (PlateIndex[i] - 1)*B_SedPlate/sin(AN_SedPlate) - 2*T_ConcreteMin
    return L
    = 7.81878 m
L_SedChannelToWall := L_SedUpflow + 2*T_ConcreteMin = 7.91878 m
N_SedPlates := round((L_SedChannelToWall - (H_SedWeirExit + T_ChannelWall - outerdiameter(ND_SedLaunder) - H_LamellaToLaunder - T_SedPlate*cos(AN_SedPlate))/tan(AN_SedPlate) - T_SedPlate/sin(AN_SedPlate))/(B_SedPlate/sin(AN_SedPlate)) + 1) = 252
V_SedUp := Q_SedBay/(L_SedUpflow*W_SedBay) = 0.000999072 m/s
# Plate Length
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L_SedPlateActive := (N_SedPlates - 1)*S_SedPlate/sin(AN_SedPlate) = 7.24575 m
L_SedPlateEst := (B_SedPlate*Q_SedBay/(W_SedBay*L_SedPlateActive*V_SedCBod) - S_SedPlate)/(sin(AN_SedPlate)*cos(AN_SedPlate)) = 0.502454 m
N_PlatesPerSheet := floor(L_SedPlateSheet/L_SedPlateEst) = 5
L_SedPlate := L_SedPlateSheet/N_PlatesPerSheet = 0.6 m
L_SedPlateUnderChan := (L_SedPlate*sin(AN_SedPlate) + T_SedPlate*cos(AN_SedPlate) + H_LamellaToLaunder + outerdiameter(ND_SedLaunder) - H_SedWeirExit - T_ChannelWall)/tan(AN_SedPlate) + T_SedPlate/sin(AN_SedPlate) = 21.1243 cm
V_SedActiveUp := Q_SedBay/(W_SedBay*L_SedPlateActive) = 1.07808 mm/s
V_SedCaptureCheck := V_SedActiveUp*B_SedPlate/(L_SedPlateEst*sin(AN_SedPlate)*cos(AN_SedPlate) + S_SedPlate) = 0.12 mm/s
# Tank and Hopper Length
L_SedHopper :=
    (W_SedExitChannel + T_SedWeir + W_SedInletChannel + T_ChannelWall + 2*T_ConcreteMin) if Q_Plant > Q_PlantMaxLF
    L_SedPlate*cos(AN_SedPlate) otherwise
    = 1.33944 m
L_Sed := L_SedHopper + L_SedUpflow = 9.15822 m
# Sludge Drain
# This is the initial drain rate
# The factor of two is because the flow rate decreases linearly as the tank drain (for a constant cross section tank). Thus the average drain rate is 1/2 the initial drain rate.
Q_SedSludgeDrain := (2*W_SedBay*L_SedUpflow*HW_SedEst/Ti_SludgeDrain) = 0.0185357 m^3/s
N_SedSludgeOrificesEst := floor(L_SedUpflow/B_SedSludgeOrificesEst) - 1 = 77
Q_SedSludgeOrificesEst := Q_SedSludgeDrain/N_SedSludgeOrificesEst = 0.000240724 m^3/s
# This is the required diameter of the sludge drain if it were circular
# To get the effective "diameter" of the sludge drain manifold (the cross section will actually be a polygon) an approximate length for the portion of the sludge drain which runs under the floc hopper is assumed to be 1m and is entered in the manifold function as if its section had inlet holes as well. Since the effect of the additional length on the calculated "diameter" is very small, the accuracy of these assumptions is not very important.
D_SedSludgeChannel := D_Manifold(Q_SedSludgeDrain, HW_SedEst, L_SedUpflow, Pi_QSludgeOrifices, Nu_Water, E_Concrete, 0, N_SedSludgeOrificesEst) = 0.103364 m
ND_SedSludgePipe := NominalDiameter(D_PipeTotal(Q_SedSludgeDrain, HW_SedEst/3, L_SedUpflow + L_SedHopper, Nu_Water, E_Pvc, K_PipeExit + K_GateValve), PS_Default) = 0.1524 m
# Something is wrong with these diameter functions.
HL_SedSludgeEst := (HL_Manifold(Q_SedSludgeDrain, D_SedSludgeChannel, L_SedUpflow + L_SedHopper, 0, Nu_Water, E_Concrete, N_SedSludgeOrificesEst) + h_l(Q_SedSludgeDrain, innerdiameter(ND_SedSludgePipe, PS_Default), L_SedHopper + ValveLength(ND_SedSludgePipe) + 10 cm, K_GateValve + K_PipeExit, Nu_Water, E_Pvc)) = 0.442273 m
# old calculation of HL sedsludgeest
HL_Manifold(Q_SedSludgeDrain, D_SedSludgeChannel, L_SedUpflow + L_SedHopper, 0, Nu_Water, E_Concrete, N_SedSludgeOrificesEst) = 0.362034 m
HL_SedSludgeOrificeEst := HW_SedEst - HL_SedSludgeEst = 1.55773 m
# The cross sectional area of the drain if it were circular
A_SedSludge := π/4*D_SedSludgeChannel^2 = 0.00839123 m^2
# Assume sludge drain square to keep width of sludge drain cover narrow
W_SedSludge := sqrt(A_SedSludge) = 0.0916037 m
H_SedSludge := (A_SedSludge/W_SedSludge) = 0.0916037 m
Z_SedSludge == H_SedSludge  # Elevation of the top of the sludge drain channel (and the bottom of the drain cover).
DropSedBottom := (T_PlantWall - T_SedTankBottomSlab) + ConRadius(ND_SedSludgePipe)
# Should the ConRadius be SUBRACTED from this distance?
# Where does the sed tank want to fall?
Z_SedSludge := Plant_Origin[2] + H_SedSludge - DropSedBottom
DropSedBottom = 0.242075 m
# Sludge Drain Cover
# This is the width of the jet of water leaving the diffuser pipes.
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W_SedDiffuserOutlet := ((Pi_JetPlane*W_SedBay*V_SedUpBod)^3/ED_SedInlet)^(1/4) = 0.46336 cm
# The jet reverser is the semi-circular trough in the center of the drain cover into which the jets from the inlet manifold discharge and re-suspend sludge. The concrete semi-circle will be cast using a length of PVC pipe.
#
# Jet reverser diameter should be at least 2x the width of the diffuser port
W_SedDiffuserOutlet = 0.0046336 m
ND_SedDiffuser = 0.0254 m
ND_SedJetReverser = 0.0762 m
S_ReversedHalfJet := (outerdiameter(ND_SedJetReverser) - W_SedDiffuserOutlet)/2 - (outerradius(ND_SedDiffuser) - innerdiameter(ND_SedDiffuser, PS_Default)/2) = 0.0403552 m
# This is the space between the lip of the jet reverser and the outer wall of the diffuser pipe through which the reversed jet must pass. Compare with the natural width of the reversed jet calculated next.
W_SedJet := W_SedDiffuserOutlet/2*Pi_VenaContractaOrifice^2 = 0.0919539 cm
T_SedDrainCoverLedge := max(2 cm, outerradius(ND_SedJetReverser) - W_SedSludge/2) = 0.02 m
W_SedDrainCover := max(W_SedSludge + 2*T_SedDrainCoverLedge, outerdiameter(ND_SedJetReverser)) = 5.18125 in
# The drain cover needs to be wide enough to rest on the ledges of the drain channel, and also needs to be at least as wide as the jet reverser.
L_SedDrainCoverSlopes := (W_SedDrainCover - outerdiameter(ND_SedJetReverser))/2 = 0.0213518 m
# old calculation of L.SedDrainCoverSlopes
# We are gerring rid of the sludge drain cover. The jet reverser is set upon sand over the drain channel, and then the cement is laid on top of that.
max(W_SedSludge + 2*T_SedDrainCoverLedge, outerdiameter(ND_SedJetReverser)) = 0.131604 m
(H_SedDrainCoverTotal == T_ConcreteMin) + outerradius(ND_SedJetReverser) + L_SedDrainCoverSlopes*tan(AN_SedSlope)
H_SedDrainCoverTotal := outerradius(ND_SedJetReverser) + L_SedDrainCoverSlopes*tan(AN_SedSlope)
A_SedDrainCover := H_SedDrainCoverTotal*W_SedDrainCover - L_SedDrainCoverSlopes*tan(AN_SedSlope)*(2*L_SedDrainCoverSlopes + outerdiameter(ND_SedJetReverser)) - 1/2*π*outerradius(ND_SedJetReverser)^2 = 0.0027462 m^2
L_SedDrainCoverTotal :=
    L_Sed - L_SedHopper if Q_Plant > Q_PlantMaxLF
    L_Sed - L_SedHopper - T_ConcreteMin otherwise
    = 7.81878 m
# L.SedDraincoverSegment should be modified so it is an integer number of manifold ports long.
L_SedDrainCoverSegmentMax := M_DrainCoverMax/(A_SedDrainCover*ρ_Concrete) = 3.0345 m
N_SedDrainCover := ceil(L_SedDrainCoverTotal/L_SedDrainCoverSegmentMax) = 3
L_SedDrainCoverSegment := L_SedDrainCoverTotal/N_SedDrainCover - S_SedDrainCoverSegment = 2.60426 m
B_SedSludgeOrifices := L_SedDrainCoverSegment/trunc(L_SedDrainCoverSegment/B_SedSludgeOrificesEst) = 10.0164 cm
# put an integer number of orifices in each drain cover segment
N_SedSludgeOrifices := floor(L_SedDrainCoverTotal/B_SedSludgeOrifices) = 78  # No need to round this because they don't drill this hole in concrete!
D_SedSludgeOrifice := D_circle(A_orifice(HL_SedSludgeOrificeEst, Pi_VenaContractaOrifice, Q_SedSludgeDrain/N_SedSludgeOrifices)) = 0.00932141 m
N_SedDrainCoverSegmentOrifices := floor(N_SedSludgeOrifices/N_SedDrainCover) = 26
# Inlet Manifold Design
L_SedManifoldPipeActive := L_SedUpflow + T_ConcreteMin + ConRadius(ND_SedManifold)/tan(AN_SedHopperSlope) - CapThickness(ND_SedManifold) = 7.97832 m
L_SedManifoldPipe := L_Sed - CapThickness(ND_SedManifold) - S_Fitting - ConRadius(ND_SedManifold) - ElbowRadius(ND_SedManifold)
# The width of the diffuser outlet is independent of the port spacing and thus can be calculated based on the flow per unit length of the diffuser pipe. There is a tiny inconsequential error introduced by the fact that the actual length of the slot is ultimately determined by an integer number of ports. It isn't worth correcting for that tiny error.
L_SedManifoldPipe = 8.67642 m
OD_Diffuser := outerdiameter(ND_SedDiffuser) = 3.3401 cm
Circ_SedDiffuser := π*innerdiameter(ND_SedDiffuser, PS_Default) = 9.37608 cm
T_SedDiffuserWall := outerradius(ND_SedDiffuser) - innerdiameter(ND_SedDiffuser, PS_Default)/2 = 0.001778 m
B_SedManifoldPort := 5 cm  # based on the mold
Pi_SedDiffuserStretch := 2*(B_SedManifoldPort - 2*T_SedDiffuserWall + W_SedDiffuserOutlet)/Circ_SedDiffuser = 1.08953
L_SedDiffuserOutlet := B_SedManifoldPort - 2*T_SedDiffuserWall = 0.046444 m
N_SedManifoldPorts := floor((L_SedUpflow - SocketDepth(ND_SedManifold) - CapThickness(ND_SedManifold))/B_SedManifoldPort) = 154
Q_SedManifoldPort := Q_SedBay/N_SedManifoldPorts = 0.0541126 L/s
D_Drill :=
    D_Drill ← D_DrillEng if EN_DrillSeries == 0
    D_Drill ← D_DrillMet otherwise  # Selects the proper drill series
D_SedManifoldPort := CeilNearest(D_PipeED(ED_SedInlet, Q_SedManifoldPort, Pi_VenaContractaOrifice, Pi_JetRound), D_Drill) = 2.38125 cm
# We need enough length to give the jet that is coming out of the manifold port to expand to the size of the rectangular slot
V_SedManifoldPort := Q_SedManifoldPort/(π*D_SedManifoldPort^2/4)*1/Pi_VenaContractaOrifice = 0.192867 m/s
V_SedDiffuser := Q_SedManifoldPort/(B_SedManifoldPort*W_SedDiffuserOutlet) = 0.233566 m/s
V_SedManifoldPort/V_SedDiffuser = 0.82575
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L_SedDiffuserRoundjetanalogy := 6.2*V_SedManifoldPort/V_SedDiffuser*D_SedManifoldPort*sqrt(Pi_VenaContractaOrifice) = 0.0967643 m  # round jet equation
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L_SedDiffuserPlanejetanalogy := (2.41*V_SedManifoldPort/V_SedDiffuser)^2*D_SedManifoldPort*sqrt(Pi_VenaContractaOrifice) = 0.0748525 m  # plane jet
L_SedManifoldDiffuser := max(L_SedDiffuserPlanejetanalogy, L_SedDiffuserRoundjetanalogy)
# Addition of the small holes on the top of the inlet manifold to allow air escape.
D_AirVentHoles := 3/8*in
N_AirVentHoles := 1  # There isn't any need for more than one hole
B_AirVentHoles := 1 in  # This term should be eliminated because there is only one vent hole.
# Conclusion is that we should keep the manifold as high as possible based on the limitations of the elbow to give as much distance as possible for the jet to expand inside the diffuser pipe.
Z_SedManifoldPipe := Plant_Origin[2] + H_SedSludge + outerradius(ND_SedJetReverser) + L_SedManifoldDiffuser + innerdiameter(ND_SedManifold, PS_Default)/2 = 0.333415 m
# The addition of T.PlantWall was deleted
# Side Slopes
W_SedSideSlopes := (W_SedBay - outerradius(ND_SedJetReverser) + T_PlantWall)/2 = 0.586175 m
# Check SedTankFunctions for these variable definitions!
W_Sed = 1.0668 m
H_SedSideSlopes := tan(AN_SedSlope)*W_SedSideSlopes = 0.698576 m
Z_SedSideSlopes == Plant_Origin[2] + H_SedSludge + T_ConcreteMin + outerradius(ND_SedJetReverser) + H_SedSideSlopes
W_SedBay = 1.0668 m
Z_SedSideSlopes := Plant_Origin[2] + H_SedSludge + outerradius(ND_SedJetReverser) + H_SedSideSlopes
# Floc Weir, Hopper, Hopper Drain, and Tank Height
Z_SedFlocWeir :=
    max(Z_SedManifoldPipe + outerradius(ND_SedManifold) + T_ConcreteMin, Z_SedSideSlopes + H_SedSlopesToFlocWeirMin) if Q_Plant > Q_PlantMaxLF
    Z_SedSideSlopes + H_SedSlopesToFlocWeirMin otherwise
    = 0.98463 m
Z_SedLamellaBottomMin := Z_SedFlocWeir + H_FlocWeirToLamellaMin = 1.08463 m
Z_SedLaunderMin := Z_SedLamellaBottomMin + (L_SedPlate + T_SedPlate)*sin(AN_SedPlate) + T_ConcreteMin + ConRadius(ND_SedLaunder) = 1.77425 m
Z_SedChannelBottomMin := Z_SedLaunderMin + ConRadius(ND_SedLaunder) - H_SedWeirExit = 1.60598 m
# first determine if you need a coupling or not embedded in the channel, flush with the 45 elbow. If you need a coupling you might need to adjust the depth to accomodate the coupling
H_SedHopperAngleFit := Z_SedChannelBottomMin - Z_SedManifoldPipe + ConRadius(ND_SedManifold) = 1.39083 m
H_SedHopperHeightNoCoupling := W_SedInletChannel + W_SedExitChannel + T_ChannelWall + 3*T_SedWeir - W_SedInletChannelPreWeir + S_Fitting + 2*ConRadius(ND_SedManifold) = 1.26944 m
H_SedChanBottomTo45Est := H_SedHopperAngleFit - H_SedHopperHeightNoCoupling = 0.121395 m
EN_SedChannelCoupling :=
    1 if H_SedChanBottomTo45Est > 0
    0 otherwise
    = 1
Z_SedChannelBottom :=
    Z_SedChannelBottomMin if EN_SedChannelCoupling == 0 or H_SedChanBottomTo45Est ≥ CouplingLength(ND_SedManifold)
    (Z_SedChannelBottomMin + CouplingLength(ND_SedManifold) - H_SedChanBottomTo45Est) otherwise
    = 1.69413 m
Z_SedLaunder :=
    Z_SedChannelBottom + H_SedWeirExit - ConRadius(ND_SedLaunder) if Q_Plant > Q_PlantMaxLF
    Z_SedLaunderMin otherwise
    = 1.8624 m
# this is the max height you can get without a coupling
Z_SedLamellaBottom := Z_SedLaunder - ((L_SedPlate + T_SedPlate)*sin(AN_SedPlate) + T_ConcreteMin + ConRadius(ND_SedLaunder)) = 1.17278 m
H_SedChanBottomTo45 := Z_SedChannelBottom - Z_SedManifoldPipe + ConRadius(ND_SedManifold) - H_SedHopperHeightNoCoupling = 0.20955 m
# determine the z of the channel elbow and x of the bottom 45
Z_SedManifoldPipe + ElbowRadius(ND_SedManifold)/sqrt(2)  # this is the z of the angled manifold pipe
Z_SedManElbow1 :=
    (Z_SedChannelBottom - SocketDepth(ND_SedManifold)) if EN_SedChannelCoupling == 0
    Z_SedChannelBottom - H_SedChanBottomTo45 - SocketDepth(ND_SedManifold) otherwise
    = 1.42058 m
Z_SedManPipeAngledBottom := Z_SedManifoldPipe + ElbowRadius(ND_SedManifold) - ElbowRadius(ND_SedManifold)/sqrt(2) = 0.422689 m
Z_SedManPipeAngledTop := Z_SedManElbow1 - ElbowRadius(ND_SedManifold)/sqrt(2) = 1.20506 m
X_SedManPipeAngledTop := Plant_Origin[0] - L_Sed + W_SedInletChannelPreWeir - S_Fitting - ElbowRadius(ND_SedManifold)/sqrt(2) + ElbowRadius(ND_SedManifold) - ConRadius(ND_SedManifold)
X_SedManPipeAngledBottom := X_SedManPipeAngledTop + Z_SedManPipeAngledTop - Z_SedManPipeAngledBottom = -8.11831 m
Z_SedManPipeAngledTop - Z_SedManPipeAngledBottom = 0.782367 m
L_SedMan45Pipe := (X_SedManPipeAngledBottom - X_SedManPipeAngledTop)*sqrt(2) = 1.10643 m
L_SedManifoldPipeAngled :=
    (-(X_SedManPipeAngledBottom + ElbowRadius(ND_SedManifold)/sqrt(2)) + Plant_Origin[0] - SocketDepth(ND_SedManifold)) if Q_Plant > Q_PlantMaxLF
    -(X_SedManPipeAngledTop + ElbowRadius(ND_SedManifold)/sqrt(2)) + Plant_Origin[0] - SocketDepth(ND_SedManifold) otherwise
    = 7.83878 m
H_SedFlocWeir := Z_SedFlocWeir - Z_SedSludge = 1.1351 m
Z_SedWeirExit := Z_SedChannelBottom + H_SedWeirExit = 1.98067 m
H_Sed :=
    Z_SedChannelBottom + H_SedInletChannel if Q_Plant > Q_PlantMaxLF
    Z_SedLaunder + ConRadius(ND_SedLaunder) + H_PlantFreeboard otherwise
    = 2.14485 m
Z_SedHopperBottom := Z_SedSludge + T_ConcreteMin = -0.100471 m
L_SedHopperBackSlope := (Z_SedFlocWeir - Z_SedHopperBottom)/tan(AN_SedHopperSlope) = 1.0851 m
H_SedHopperBackSlope := L_SedHopperBackSlope*tan(AN_SedHopperSlope) = 1.0851 m
H_SedHopperFrontSlopeMax := Z_SedManifoldPipe - Z_SedHopperBottom = 0.433886 m
L_SedHopperFrontSlopeMax := H_SedHopperFrontSlopeMax/tan(AN_SedHopperSlope) = 0.433886 m
# Back slope will be flat if L_SedHopperFrontSlopeMax + L_SedHopperBackSlope < L_SedHopper - T_ConcreteMin
Z_SedHopperBackSlope := Z_SedHopperBottom + H_SedHopperBackSlope = 0.98463 m
# the bottom of the hopper can be no lower
H_SedHopperFrontSlope :=
    H_SedHopperFrontSlopeMax if L_SedHopperFrontSlopeMax + L_SedHopperBackSlope ≥ L_SedHopper - T_ConcreteMin
    (0 m) otherwise
    = 0.433886 m
Z_SedHopperFrontSlope := Z_SedHopperBottom + H_SedHopperFrontSlope = 0.333415 m
L_SedHopperFrontSlope :=
    (L_SedHopper - T_ConcreteMin - L_SedHopperBackSlope) if L_SedHopperFrontSlopeMax + L_SedHopperBackSlope < L_SedHopper - T_ConcreteMin
    H_SedHopperFrontSlope/tan(AN_SedHopperSlope) otherwise
    = 0.433886 m
L_SedHopperFrontSlope - L_SedHopper + T_ConcreteMin
Z_SedHopperIntersect :=
    Z_SedHopperFrontSlope if L_SedHopperFrontSlopeMax + L_SedHopperBackSlope < L_SedHopper - T_ConcreteMin
    (((L_SedHopperBackSlope - (L_SedHopper - T_ConcreteMin - L_SedHopperFrontSlope))/2)*tan(AN_SedHopperSlope) + Z_SedHopperBottom) otherwise
    = 0.0143042 m
X_SedHopperBottom :=
    (Plant_Origin[0] - L_Sed + L_SedHopperBackSlope - ((L_SedHopperBackSlope - (L_SedHopper - T_ConcreteMin - L_SedHopperFrontSlope))/2)) if L_SedHopperFrontSlopeMax + L_SedHopperBackSlope ≥ L_SedHopper - T_ConcreteMin
    (Plant_Origin[0] - L_Sed + L_SedHopperBackSlope) otherwise
    = -8.18789 m
B_SedLaunderOrifices := B_SedLaunderOrificesEst = 0.1 m
L_SedLaunder :=
    L_SedChannelToWall - CapThickness(ND_SedLaunder) if T_ChannelWall > 2*CouplingLength(ND_SedLaunder) and Q_Plant > Q_PlantMaxLF
    L_SedChannelToWall + T_ChannelWall - 2*CouplingLength(ND_SedLaunder) - CapThickness(ND_SedLaunder) if CouplingLength(ND_SedLaunder) < T_ChannelWall < 2*CouplingLength(ND_SedLaunder) and Q_Plant > Q_PlantMaxLF
    L_Sed - CapThickness(ND_SedLaunder) - S_Fitting - ElbowRadius(ND_SedLaunder) - ConRadius(ND_SedLaunder) if Q_Plant ≤ Q_PlantMaxLF
    L_SedChannelToWall + T_ChannelWall - CouplingLength(ND_SedLaunder) - CapThickness(ND_SedLaunder) otherwise
    = 7.8505 m
N_SedLaunderOrifices := floor((L_SedLaunder - CapHeight(ND_SedLaunder) + CapThickness(ND_SedLaunder) - SocketDepth(ND_SedLaunder))/B_SedLaunderOrifices) = 76
Q_SedLaunderOrifices := Q_SedBay/N_SedLaunderOrifices = 0.000109649 m^3/s
# This the HL due to major & minor losses loses through the manifold.
HL_SedLaunderMajor := HL_Manifold(Q_SedBay, innerdiameter(ND_SedLaunder, PS_Default), L_SedLaunder, 0, Nu_Water, E_Pvc, N_SedLaunderOrifices) = 0.00105702 m
HL_SedLaunderOrificeEst := HL_SedLaunderBod - HL_SedLaunderMajor = 0.038943 m
D_SedLaunderOrifice := RoundNearest(D_circle(A_orifice(HL_SedLaunderOrificeEst, Pi_VenaContractaOrifice, Q_SedLaunderOrifices)), D_Drill) = 1.5875 cm
# This is the total headloss through the launder based on the actual diameter of the orifices
HL_SedLaunderOrifice := h_orifice(D_SedLaunderOrifice, Pi_VenaContractaOrifice, Q_SedLaunderOrifices) = 3.94225 cm
HW_Sed :=
    Z_SedChannelBottom + HW_SedExitChannel + HL_SedLaunderBod if Q_Plant > Q_PlantMaxLF
    Z_SedLaunder + HL_SedLaunderBod otherwise
    = 2.04485 m
# Exit Launder
# Hopper Drain
Q_SedHopperDrainMax := Q_pipetotal(innerdiameter(ND_SedHopperDrain, PS_Default), HW_Sed - Z_SedHopperBottom, L_SedHopperBackSlope + max(CouplingLength(ND_SedHopperDrain), T_PlantWall) + ValveLength(ND_SedHopperDrain) + π/4*ElbowRadius(ND_SedHopperDrain), Nu_Water, E_Pvc, K_PipeEnt + K_PipeExit + K_GateValve) = 2.55141 L/s
L_SedHopperDrainPipe := L_SedHopperBackSlope + T_PlantWall - CouplingLength(ND_SedHopperDrain) + 2*SocketDepth(ND_SedHopperDrain) = 1.22957 m
# Module Design
N_SedPlates = 252
L_SedPlate = 60 cm
N_SedModules :=
    for i ∈ N_SedModulePlatesMin .. N_SedModulePlatesMax
        N ← N_SedPlates/i
        break if mod(N_SedPlates, i) == 0
    return N
    = 28
N_SedModulePlates := N_SedPlates/N_SedModules = 9
# This part of the code serves to draw the module pipe for the plate settlers. In order to understand the meaning of each value please refer to the autocad drawing Lamina.Explanation
# This is the part of the pipe sticking out that the cap is fitted on. The cap will serve as a resting spot for the next module. The modules are identical so they can be interchangeable.
L_SedModulePipeIncrement := B_SedPlate - T_SedPlate - (CapDiameter(NominalPipeSize(ND_SedModulePipeSpacer))/2 - outerradius(NominalPipeSize(ND_SedModulePipeSpacer))) = 0.0216663 m
# This is the actual spacing between the pipes.
L_SedModulePipe := N_SedModulePlates*B_SedPlate - (B_SedPlate - T_SedPlate) + 2*L_SedModulePipeIncrement = 0.261333 m  # This is the length of a sed module pipe.
# The cap should be as long as the spacing between the two modules. If it is longer, we will need to cut it accordingly.
S_SedModulePipes := max(L_SedPlate - 2*outerdiameter(ND_SedModulePipe) - 2*S_SedPlateModuleMin - (N_SedModulePlates*(T_SedPlate + (B_SedPlate - T_SedPlate)) - (B_SedPlate - T_SedPlate))/tan(AN_SedPlate), (L_SedModulePipe - L_SedModulePipeIncrement)*tan(90 deg - AN_SedPlate) + CapDiameter(NominalPipeSize(ND_SedModulePipeSpacer))) = 0.391466 m
.
L_SedModulePipeCap := min(B_SedPlate - T_SedPlate, CapHeight(NominalPipeSize(ND_SedModulePipeSpacer)) - (CapDiameter(NominalPipeSize(ND_SedModulePipeSpacer))/2 - outerradius(NominalPipeSize(ND_SedModulePipeSpacer)))) = 0.025 m
S_SedPlateModule := (L_SedPlate - S_SedModulePipes - (L_SedModulePipe - 2*L_SedModulePipeIncrement)/tan(AN_SedPlate))/2 = 0.041336 m
# This is the new spacing between the bottom of the first plate settler in a module and the first pipe.
.
L_SedActive := N_SedPlates*B_SedPlate/sin(AN_SedPlate) - T_SedPlate/sin(AN_SedPlate) = 7.85427 m
H_SedFrameStub := ((B_SedPlate - T_SedPlate)/sin(AN_SedPlate) - outerdiameter(ND_SedFrameStub))*tan(AN_SedPlate) = 0.013045 m
B_SedFrameStub := B_SedPlate/sin(AN_SedPlate)*N_SedModulePlates = 0.280592 m
# Plate Pipe Frame (not currently used)
# Residence Time Estimate
Vol_SedManifoldEst := (L_SedManifoldPipe + π/4*ElbowRadius(ND_SedManifold) + Z_SedChannelBottom - T_ChannelWall - Z_SedManifoldPipe - ElbowRadius(ND_SedManifold))*π*outerradius(ND_SedManifold)^2 = 370.223 L
Vol_SedPlatesEst := N_SedPlates*L_SedPlate*W_SedPlate*T_SedPlate = 322.6 L
Vol_SedChannelsEst := W_SedBay*(W_SedInletChannel + T_ChannelWall)*(H_SedInletChannel + T_ChannelWall) + W_SedBay*(W_SedExitChannel + T_ChannelWall)*(H_SedExitChannel + T_ChannelWall) = 864.775 L
Vol_SedBayEst := W_SedBay*L_Sed*HW_Sed - 1/2*L_SedHopper*H_SedHopperFrontSlope*W_SedBay - W_SedSideSlopes*H_SedSideSlopes*L_SedUpflow - Vol_SedManifoldEst - Vol_SedPlatesEst - Vol_SedChannelsEst = 14908.8 L
Ti_Sed := Vol_SedBayEst/Q_SedBay = 29.8177 min
H_WalkwayToTankWall := H_SedInletChannel = 0.450714 m
Z_Walkway := Plant_Origin[0] + H_Sed - H_WalkwayToTankWall = 1.69413 m
