# Created by Guneet Sandhu (gs559) and  Dhaval Mehta (dm525), 6/4/2014
# CDC/CDC-LFSRSF Design
Mod := 0
Q_Plant := 15*L/s
method := "EtFlocSedFi"
# User Inputs and References
# Note that we use the CDC and Chem Storage Tank Function files (and NOT the CDC_India file) to reference variables and formulas. All variables changed after expert inputs have been drawn from those in the CDC_India file to be consistant with May's work and systems on the ground. We leave them as user inputs here for flexbility.
# [reference: ExpertInputs.xmcd]
# [reference: MathFunctions.xmcd]
# [reference: MathFunctions.xmcd]
# [reference: PipeDatabase.xmcd]
# [reference: PipeDatabase.xmcd]
# [reference: MaterialsDatabase.xmcd]
# [reference: MaterialsDatabase.xmcd]
# [reference: FluidsFunctions.xmcd]
# [reference: FluidsFunctions.xmcd]
# [reference: CdcFunctions.xmcd]
# [reference: LfomFunctions.xmcd]
# [reference: LFOM.xmcd]
# Variables Changed after Expert Inputs:
# User inputs
EN_Chlorine := 2
C_ChlorineStockMax := 10*gm/L
C_ChlorineDoseMax = 2 mgm/L
L_CoagTubeMax := 3 m  # The maximum length available for coagulant dosing tubes
L_Et := L_CoagTubeMax + 0.2 m  # (This variable is used in LinearCdc code)
L_Et = 3.2 m
HL_LfomMin := 20 cm
HL_LfomMax := 20 cm
# May uses this in her code for CdcIndia - with the argument of shortening chemical dosing tubes
HL_CdcChlorine := HL_LfomMin
ND_EtFloat := 6 in
# [reference: LinearCdc.xmcd]
# Stock Tank Inputs
Ti_ChlorineStock := 30 hr
ND_CoagPiping := 0.5 in
# [reference: ChemStorageTanks.xmcd]
T_Entrance := 7.5 cm
L_Entrance := 70 cm
W_Entrance := 50 cm
HW_Et := HL_Lfom + CapHeight(ND_EtFloat) + S_Fitting = 0.377 m  # Assuming the exit pipe from the entrance tank is at the bottom of the tank
H_Entrance := HW_Et + H_PlantFreeboard = 0.477 m
# Entrance Tank Variables
T_Entrance = 7.5 cm
L_Entrance = 70 cm
W_Entrance = 50 cm
H_Entrance = 47.7 cm
# LFOM Display Variables
Pi_LfomSafety := Π_LfomSafety = 1.5
HL_Flowmeasure = 0.2 m
ND_LfomPipe = 8 in
HL_Lfom = 0.2 m
D_LfomOrifices = 0.0238125 m
B_LfomRows = 0.025 m
N_LfomOrifices = [14; 3; 4; 3; 3; 3; 2; 2]
H_LfomOrifices = [0.0119062; 0.0369063; 0.0619062; 0.0869063; 0.111906; 0.136906; 0.161906; 0.186906] m
ND_RMPipe = 8 in
# CDC Display Variables
# General | Chlorine
L_CdcChlorineTube = 151.122 cm
L_LeverArmTotal = 91.44 cm
N_CdcChlorineTubes = 1
L_CdcFloatArm = 41.275 cm
HL_CdcChlorine = 20 cm
L_CdcScaleArm = 50.165 cm
C_ChlorineStockMax = 10 kg/m^3
B_StockOutlet = 10 cm
H_CoagTankAboveHeadTank = 0.3 m
C_ChlorineDoseMax = 0.002 kg/m^3
K_CdcTube = 2
ND_EtFloat = 6 in
L_CdcChlorineTubeMax = 300 cm
Q_ChlorineStock = 3 mL/s
D_CdcChlorine = 0.125 in
D_ChlorFloatValveOrifice = 0.23622 cm
D_ChlorTubeStockToCH = 0.375 in
# Stock Tank Variables
Ti_ChlorineStock = 30 hr
Vol_ChlorineTank = 450 L
H_CoagTankAboveHeadTank = 30 cm
B_StockOutlet = 10 cm
ND_CoagPiping = 0.5 in
