# Mathcad to AutoCAD translators:
# [reference: MtoATranslators.xmcd]
# The wrapped MtoA translator contains the functions that the user will want to access. These functions will draw pieces with full functionality - specifying the location, dimension, and orientation of the object. Also, it contains layer control and subtraction capabilities for grouped objects.
# [reference: MtoATranslatorsWrapped.xmcd]
# Layers
PVCLayer := layer_new("PVC", ltgrey)
SteelLayer := layer_new("Steel", grey)
SelectPVCLayer := SelectLayer("PVC")
SelectSteelLayer := SelectLayer("Steel")
PVCFrz := FreezeLayer("PVC")
SteelFrz := FreezeLayer("Steel")
ThawPVC := ThawMultiple(["PVC"])
ThawSteel := ThawMultiple(["Steel"])
# Dimensions
T_LBracket := 1 cm
W_Body := 12 cm
L_Pin := 8 cm
H_LBracket2 := 2 cm
T_Body := 3 cm
H_LBracket1 := 6 cm
L_PinToEdge := 1 cm
W_LBracket1 := 2 cm
W_LBracket2 := 4 cm
D_Pin := 1 cm
H_Body := 17 cm
D_ManifoldPipe := 2 in = 5.08 cm
# I randomly selected these values. Input the actaul demensions
# and you can change the size of the Spacer.
# Body
Body_Origin := [0 m; 0 m; 0 m]
Body_FarCorner := Body_Origin + [W_Body; H_Body; -T_Body]
BodyBox := Box(Body_Origin, Body_FarCorner)
# Cutting Out Where the Pipe Fits
PipeFit_Origin := Body_Origin + [W_Body/2; H_Body; 0 m]
PipeFit := CylinderF(PipeFit_Origin, D_ManifoldPipe/2, T_Body, [0; -90; 0]*deg)
RemovePipeFit := SubtractF(["PVC"], "DeleteMe")
# Pin Hole
PinHole_Origin := Body_Origin + [W_Body - L_PinToEdge - D_Pin/2; H_Body - L_PinToEdge - D_Pin/2; 0 m]
PinHole := CylinderF(PinHole_Origin, D_Pin/2, T_Body, [0; -90; 0]*deg)
RemovePinHole := SubtractF(["PVC"], "DeleteMe")
# Pin
Pin_Origin := Body_Origin + [W_Body - L_PinToEdge - D_Pin/2; H_Body - L_PinToEdge - D_Pin/2; (L_Pin - T_Body)/2]
Pin := CylinderF(Pin_Origin, D_Pin/2, L_Pin, [0; -90; 0]*deg)
# L Brackets
LBracket1_Origin := Body_Origin + [W_Body - W_LBracket1; -H_LBracket2 - D_Pin; T_LBracket]
LBracket1_FarCorner := LBracket1_Origin + [W_LBracket1; H_LBracket1; -T_LBracket]
LBracket1 := Box(LBracket1_Origin, LBracket1_FarCorner)
LBracket2_Origin := LBracket1_Origin + [-W_LBracket2; 0 m; 0 m]
LBracket2_FarCorner := LBracket2_Origin + [W_LBracket2; H_LBracket2; -T_LBracket]
LBracket2 := Box(LBracket2_Origin, LBracket2_FarCorner)
LBracket1B_Origin := Body_Origin + [W_Body - W_LBracket1; -H_LBracket2 - D_Pin; -T_Body]
LBracket1B_FarCorner := LBracket1B_Origin + [W_LBracket1; H_LBracket1; -T_LBracket]
LBracket1B := Box(LBracket1B_Origin, LBracket1B_FarCorner)
LBracket2B_Origin := LBracket1B_Origin + [-W_LBracket2; 0 m; 0 m]
LBracket2B_FarCorner := LBracket2B_Origin + [W_LBracket2; H_LBracket2; -T_LBracket]
LBracket2B := Box(LBracket2B_Origin, LBracket2B_FarCorner)
PVCBody_Script := stack(PVCLayer, BodyBox, PVCFrz, SelectPVCLayer, PipeFit, GroupDelete, RemovePipeFit, PVCFrz, SelectPVCLayer, PinHole, GroupDelete, RemovePinHole)
Pin_Script := stack(SteelLayer, Pin, SteelFrz)
LBracket_Script := stack(SteelLayer, LBracket1, LBracket2, Union_All, SteelFrz, SteelLayer, LBracket1B, LBracket2B, Union_All, SteelFrz)
Spacer_Script := stack(PVCBody_Script, Pin_Script, LBracket_Script)
# [component: inputs Spacer_Script]
