L_ChemLeverArmSpace := 75 cm
# Stacked Rapid Sand Filter
ND_ChlorPipe := 1/2*in
ND_FiManWingSpacer := 2 in
L_FiSandOutletPipe := 20 cm
# Layers
# Filter masonry
FiTankLayer := layer_new("FiTankCon", grey)
SelectFiTank := SelectLayer("FiTankCon")
FiTankFrz := FreezeLayer("FiTankCon")
SubtractFromFiTank := SubtractF(["FiTankCon"], "DeleteMe")
FiInletChannelLayer := layer_new("FiInletChannelCon", grey)
SelectFiInletChannel := SelectLayer("FiInletChannelCon")
FiInletChannelFrz := FreezeLayer("FiInletChannelCon")
SubtractFromFiInletChannel := SubtractF(["FiInletChannelCon"], "DeleteMe")
FiEntExitBoxLayer := layer_new("FiEntExitBoxCon", grey)
SelectFiEntExitBox := SelectLayer("FiEntExitBoxCon")
FiEntExitBoxFrz := FreezeLayer("FiEntExitBoxCon")
SubtractFromFiEntExitBox := SubtractF(["FiEntExitBoxCon"], "DeleteMe")
FiOFDistBoxLayer := layer_new("FiOverflowDistBoxCon", grey)
SelectFiOFDistBox := SelectLayer("FiOverflowDistBoxCon")
FiOFDistBoxFrz := FreezeLayer("FiOverflowDistBoxCon")
SubtractFromFiOFDistBox := SubtractF(["FiOverflowDistBoxCon"], "DeleteMe")
SelectFiCon := SelectLayer("FiCon")  # "FiCon" layer not created until all other masonry layers are unioned
FiConFrz := FreezeLayer("FiCon")
SubtractFromFiCon := SubtractF(["FiCon"], "DeleteMe")
# Filter plumbing
FiInletPipeLayer := layer_new("FiInletPipePlu", blue)
SelectFiInletPipe := SelectLayer("FiInletPipePlu")
FiInletPipeFrz := FreezeLayer("FiInletPipePlu")
FiEntExitPipeLayer := layer_new("FiEntExitPipesPlu", blue)
SelectFiEntExitPipe := SelectLayer("FiEntExitPipesPlu")
FiEntExitPipeFrz := FreezeLayer("FiEntExitPipesPlu")
FiEntExitFittingLayer := layer_new("FiEntExitFittingsPlu", green)
SelectFiEntExitFitting := SelectLayer("FiEntExitFittingsPlu")
FiEntExitFittingFrz := FreezeLayer("FiEntExitFittingsPlu")
FiValveLayer := layer_new("FiValvePlu", blue3)
SelectFiValve := SelectLayer("FiValvePlu")
FiValveFrz := FreezeLayer("FiValvePlu")
FiRemovableLayer := layer_new("FiRemovablePlu", red)
SelectFiRemovable := SelectLayer("FiRemovablePlu")
FiRemovableFrz := FreezeLayer("FiRemovablePlu")
FiFlexCouplingLayer := layer_new("FiFlexCouplingPlu", purple)
SelectFiFlexCoupling := SelectLayer("FiFlexCouplingPlu")
FiFlexCouplingFrz := FreezeLayer("FiFlexCouplingPlu")
FiManPipeLayer := layer_new("FiManPipePlu", blue)
SelectFiManPipe := SelectLayer("FiManPipePlu")
FiManPipeFrz := FreezeLayer("FiManPipePlu")
SubtractFromFiManPipe := SubtractF(["FiManPipePlu"], "DeleteMe")
FiManCapLayer := layer_new("FiManCapPlu", green)
SelectFiManCap := SelectLayer("FiManCapPlu")
FiManCapFrz := FreezeLayer("FiManCapPlu")
SubtractFromFiManCap := SubtractF(["FiManCapPlu"], "DeleteMe")
FiManBranchLayer := layer_new("FiManBranchPlu", blue3)
SelectFiManBranch := SelectLayer("FiManBranchPlu")
FiManBranchFrz := FreezeLayer("FiManBranchPlu")
SubtractFromFiManBranch := SubtractF(["FiManBranchPlu"], "DeleteMe")
FiReducerLayer := layer_new("FiReducerPlu", orange)
SelectFiReducer := SelectLayer("FiReducerPlu")
FiReducerFrz := FreezeLayer("FiReducerPlu")
SubtractFromFiReducer := SubtractF(["FiReducerPlu"], "DeleteMe")
FiSiphonFittingLayer := layer_new("FiSiphonFittingPlu", green)
SelectFiSiphonFitting := SelectLayer("FiSiphonFittingPlu")
FiSiphonFittingFrz := FreezeLayer("FiSiphonFittingPlu")
SubtractFromFiSiphonFitting := SubtractF(["FiSiphonFittingPlu"], "DeleteMe")
FiSiphonPipeLayer := layer_new("FiSiphonPipePlu", blue)
SelectFiSiphonPipe := SelectLayer("FiSiphonPipePlu")
FiSiphonPipeFrz := FreezeLayer("FiSiphonPipePlu")
SubtractFromFiSiphonPipe := SubtractF(["FiSiphonPipePlu"], "DeleteMe")
FiSiphonValveLayer := layer_new("FiSiphonAirValvePlu", blue3)
SelectFiSiphonValve := SelectLayer("FiSiphonAirValvePlu")
FiSiphonValveFrz := FreezeLayer("FiSiphonAirValvePlu")
FiAdapterLayer := layer_new("FiAdapterPlu", blue3)
SelectFiAdapter := SelectLayer("FiAdapterPlu")
FiAdapterFrz := FreezeLayer("FiAdapterPlu")
FiSandDrainValveLayer := layer_new("FiSandDrainValvePlu", blue2)
SelectFiSandDrainValve := SelectLayer("FiSandDrainValvePlu")
FiSandDrainValveFrz := FreezeLayer("FiSandDrainValvePlu")
FiSandDrainPipeLayer := layer_new("FiSandDrainPipePlu", blue)
SelectFiSandDrainPipe := SelectLayer("FiSandDrainPipePlu")
FiSandDrainPipeFrz := FreezeLayer("FiSandDrainPipePlu")
FiSandDrainFittingLayer := layer_new("FiSandDrainFittingPlu", green)
SelectFiSandDrainFitting := SelectLayer("FiSandDrainFittingPlu")
FiSandDrainFittingFrz := FreezeLayer("FiSandDrainFittingPlu")
FiSandDrainAdapterLayer := layer_new("FiSandDrainAdapterPlu", blue3)
SelectFiSandDrainAdapter := SelectLayer("FiSandDrainAdapterPlu")
FiSandDrainAdapterFrz := FreezeLayer("FiSandDrainAdapterPlu")
FiAuxRemovableLayer := layer_new("FiAuxRemovablePlu", red)
SelectFiAuxRemovables := SelectLayer("FiAuxRemovablePlu")
FiAuxRemovableFrz := FreezeLayer("FiAuxRemovablePlu")
FiAuxFittingLayer := layer_new("FiAuxFittingPlu", green)
SelectFiAuxFitting := SelectLayer("FiAuxFittingPlu")
FiAuxFittingFrz := FreezeLayer("FiAuxFittingPlu")
FiDistPipeLayer := layer_new("FiDistPipePlu", blue)
SelectFiDistPipe := SelectLayer("FiDistPipePlu")
FiDistPipeFrz := FreezeLayer("FiDistPipePlu")
FiDistFittingLayer := layer_new("FiDistFittingPlu", green)
SelectFiDistFitting := SelectLayer("FiDistFittingPlu")
FiDistFittingFrz := FreezeLayer("FiDistFittingPlu")
FiAuxPipeLayer := layer_new("FiAuxPipePlu", blue)
SelectFiAuxPipe := SelectLayer("FiAuxPipePlu")
FiAuxPipeFrz := FreezeLayer("FiAuxPipePlu")
FiEntranceFittingLayer := layer_new("FiEntranceFittingPlu", green)
SelectFiEntranceFitting := SelectLayer("FiEntranceFittingPlu")
FiEntranceFittingFrz := FreezeLayer("FiEntranceFittingPlu")
FiInletChannelDrainFittingLayer := layer_new("FiInletChannelDrainFittingPlu", green)
SelectFiInletChannelDrainFitting := SelectLayer("FiInletChannelDrainFittingPlu")
FiInletChannelDrainFittingFrz := FreezeLayer("FiInletChannelDrainFittingPlu")
FiInletChannelDrainPipeLayer := layer_new("FiInletChannelDrainPipePlu", blue)
SelectFiInletChannelDrainPipe := SelectLayer("FiInletChannelDrainPipePlu")
FiInletChannelDrainPipeFrz := FreezeLayer("FiInletChannelDrainPipePlu")
FiInletChannelDrainRemovableLayer := layer_new("FiInletChannelDrainRemovablePlu", red)
SelectFiInletChannelDrainRemovable := SelectLayer("FiInletChannelDrainRemovablePlu")
FiInletChannelDrainRemovableFrz := FreezeLayer("FiInletChannelDrainRemovablePlu")
FiManWingSpacerTeeLayer := layer_new("FiManWingSpacerTee", red)
SelectFiManWingSpacerTee := SelectLayer("FiManWingSpacerTee")
FiManWingSpacerTeeFrz := FreezeLayer("FiManWingSpacerTee")
SubtractFromFiManWingSpacerTee := SubtractF(["FiManWingSpacerTee"], "DeleteMe")
FiManWingSpacerPipeLayer := layer_new("FiManWingSpacerPipe", orange)
SelectFiManWingSpacerPipe := SelectLayer("FiManWingSpacerPipe")
FiManWingSpacerPipeFrz := FreezeLayer("FiManWingSpacerPipe")
FiBwManWingSpacerTeeLayer := layer_new("FiBwManWingSpacerTee", red)
SelectFiBwManWingSpacerTee := SelectLayer("FiBwManWingSpacerTee")
FiBwManWingSpacerTeeFrz := FreezeLayer("FiBwManWingSpacerTee")
SubtractFromFiBwManWingSpacerTee := SubtractF(["FiBwManWingSpacerTee"], "DeleteMe")
FiBwManWingSpacerPipeLayer := layer_new("FiBwManWingSpacerPipe", orange)
SelectFiBwManWingSpacerPipe := SelectLayer("FiBwManWingSpacerPipe")
FiBwManWingSpacerPipeFrz := FreezeLayer("FiBwManWingSpacerPipe")
# Filter removable baffles
FiRemovableBaffleLayer := layer_new("FiRemovableBaffle", purple)
SelectFiRemovableBaffle := SelectLayer("FiRemovableBaffle")
FiRemovableBaffleFrz := FreezeLayer("FiRemovableBaffle")
# Drain channel
DrainChannelLayer := layer_new("DrainChannelCon", grey)
SelectDrainChannel := SelectLayer("DrainChannelCon")
DrainChannelFrz := FreezeLayer("DrainChannelCon")
SubtractFromDrainChannel := SubtractF(["DrainChannelCon"], "DeleteMe")
# Chemical plumbing
FiChlorineDosePipeLayer := layer_new("FiChlorineDosePipePlu", blue)
SelectFiChlorineDosePipe := SelectLayer("FiChlorineDosePipePlu")
FiChlorineDosePipeFrz := FreezeLayer("FiChlorineDosePipePlu")
FiChlorineDoseFittingLayer := layer_new("FiChlorineDoseFittingPlu", green)
SelectFiChlorineDoseFitting := SelectLayer("FiChlorineDoseFittingPlu")
FiChlorineDoseFittingFrz := FreezeLayer("FiChlorineDoseFittingPlu")
SubtractFromFiChlorineDoseFitting := SubtractF(["FiChlorineDoseFittingPlu"], "DeleteMe")
# Masonry box and plant drain channel origin points
Fi_origin := [
    Plant_Origin[0] - W_FiInletChannel - 4*T_PlantWall - T_FiWall - L_FiEntrance - L_FiExit - W_MpWalkway - L_Sed - T_SedWall - W_PlantDC;
    Plant_Origin[1] - T_SedWall + T_FiWall;
    Z_FiBottom
]
FiEntranceBox_origin := [
    Plant_Origin[0] - W_FiInletChannel - T_PlantWall - T_SedWall - L_Sed - W_PlantDC - T_FiWeir;
    Fi_origin[1] + W_Fi/2 - W_FiEntrance + S_Fitting + ConRadius(ND_FiBwTrunk);
    Z_FiEntranceBottom
]
FiExitBox_origin := FiEntranceBox_origin + [-L_FiEntrance - T_PlantWall; 0; 0]
FiInletChannel_Origin := [
    Plant_Origin[0] - L_Sed - T_SedWall - T_PlantWall - W_PlantDC;
    FiEntranceBox_origin[1];
    Z_FiInletChannelBottom
]
FiOverflowBox_Origin := [
    FiEntranceBox_origin[0] + T_FiWeir - T_PlantWall;
    FiEntranceBox_origin[1] + W_FiEntrance + T_PlantWall;
    Z_FiOverflowBottom
]
FiDistBox_Origin := [FiOverflowBox_Origin[0] - L_FiOverflow - T_PlantWall; FiOverflowBox_Origin[1]; FiExitBox_origin[2]]
# Masonry box dimensions
FiEntranceBox_dim := [L_FiEntrance; W_FiEntrance; H_FiEntrance]
# The tank is first drawn with the overflow box length and then a slice is cut out of the entrance weir wall to lengthen the tank
FiExitBox_dim := [L_FiExit; W_FiEntrance; H_FiEntrance]
Fi_dim := [L_Fi; W_Fi; H_Fi]
FiOverflowBox_Dim := [L_FiOverflow; W_FiOverflow; H_FiOverflow]
FiDistBox_Dim := [L_FiExit; W_FiOverflow; H_FiEntrance]
# Plant drain channel
# Origins and lengths
PlantLowerDC_Origin := [
    Plant_Origin[0] - L_Sed - T_PlantWall - W_PlantDC;
    Plant_Origin[1] - T_PlantWall;
    Z_PlantLowerDCBottom + HW_PlantDCMax
]
PlantUpperDC_Origin := [
    Plant_Origin[0] - L_Sed - T_PlantWall - W_PlantDC;
    Fi_origin[1] + N_Fi*(W_Fi + T_FiWall) - T_PlantWall;
    Z_PlantUpperDCBottom + HW_PlantDCMax
]
L_PlantLowerDC := T_FiWall + N_Fi*(W_Fi + T_FiWall) - T_PlantWall
L_PlantUpperDC := Et_Origin[1] + W_Et + L_ChemLeverArmSpace + T_PlantWall - (Fi_origin[1] + N_Fi*(W_Fi + T_FiWall) - T_PlantWall)
L_PlantDC := L_PlantLowerDC + L_PlantUpperDC
# Drain channel bases
MainDCLower := DrainChannelF(PlantLowerDC_Origin, [270; 0; 0]*deg, Q_TankDrainMax, W_PlantDC, HW_PlantDCMax, L_PlantLowerDC, Slope_PlantDC, Nu_Water, E_Concrete, 1)
MainDCUpper := DrainChannelF(PlantUpperDC_Origin, [270; 0; 0]*deg, Q_TankDrainMax, W_PlantDC, HW_PlantDCMax, L_PlantUpperDC, Slope_PlantDC, Nu_Water, E_Concrete, 1)
MainDCScript := stack(DrainChannelLayer, MainDCLower, MainDCUpper)
# Additional walls
DCWestWallLower := BoxF([
    Plant_Origin[0] - L_Sed - T_PlantWall - W_PlantDC;
    Plant_Origin[1] - T_PlantWall;
    PlantLowerDC_Origin[2]
], [
    Plant_Origin[0] - L_Sed - W_PlantDC - 2*T_PlantWall;
    PlantLowerDC_Origin[1] + L_PlantLowerDC + T_PlantWall;
    Z_Walkway - T_Floor
], [0; 0; 0]*deg)
DCWestWallUpper := BoxF([Plant_Origin[0] - L_Sed - T_PlantWall - W_PlantDC; PlantUpperDC_Origin[1]; PlantUpperDC_Origin[2]], [
    Plant_Origin[0] - L_Sed - W_PlantDC - 2*T_PlantWall;
    Plant_Origin[1] - T_PlantWall + L_PlantDC + T_PlantWall;
    Z_Walkway - T_Floor
], [0; 0; 0]*deg)
DCEastWallLower := BoxF([Plant_Origin[0] - L_Sed - T_PlantWall; Plant_Origin[1] - T_PlantWall; PlantLowerDC_Origin[2]], [
    Plant_Origin[0] - L_Sed;
    PlantLowerDC_Origin[1] + L_PlantLowerDC + T_PlantWall;
    Z_Walkway - T_Floor
], [0; 0; 0]*deg)
DCEastWallUpper := BoxF([Plant_Origin[0] - L_Sed - T_PlantWall; PlantUpperDC_Origin[1]; PlantUpperDC_Origin[2]], [
    Plant_Origin[0] - L_Sed;
    Plant_Origin[1] - T_PlantWall + L_PlantDC + T_PlantWall;
    Z_Walkway - T_Floor
], [0; 0; 0]*deg)
DCNorthWall := BoxF([Plant_Origin[0] - L_Sed; Plant_Origin[1] + L_PlantDC - T_PlantWall; PlantUpperDC_Origin[2]], [
    Plant_Origin[0] - L_Sed - T_ChannelWall - W_PlantDC - T_PlantWall;
    Plant_Origin[1] + L_PlantDC;
    Z_Walkway - T_Floor
], [0; 0; 0]*deg)
DCDropoffWall := BoxF([Plant_Origin[0] - L_Sed; PlantLowerDC_Origin[1] + L_PlantLowerDC; PlantLowerDC_Origin[2] - zc], [
    Plant_Origin[0] - L_Sed - W_PlantDC - 2*T_PlantWall;
    PlantLowerDC_Origin[1] + L_PlantLowerDC + T_PlantWall;
    PlantUpperDC_Origin[2] - HW_PlantDCMax - Slope_PlantDC*L_PlantUpperDC
], [0; 0; 0]*deg)
DrainChannelRMRecessWallsNORMAL := BoxF([
    Plant_Origin[0] - L_Sed - T_PlantWall;
    Et_Origin[1] + W_Et + T_PlantWall;
    PlantUpperDC_Origin[2] - T_ChannelWall - HW_PlantDCMax
], [
    FlocCoupling_Origin[0] + ConRadius(ND_RMPipe) + S_Fitting + T_PlantWall;
    Floc_Origin[1] + N_FlocChannels*(W_FlocChannel + T_PlantWall) - T_PlantWall;
    Z_Walkway - T_Floor
], [0; 0; 0]*deg)
DrainChannelRMRecessWallsEtFloc := BoxF([
    Et_Origin[0] + T_PlantWall;
    Et_Origin[1] + W_Et;
    PlantUpperDC_Origin[2] - T_PlantWall - HW_PlantDCMax
], [
    Et_Origin[0] - L_Et - T_PlantWall;
    Et_Origin[1] + W_Et + 2*T_PlantWall + L_ChemLeverArmSpace;
    Z_Walkway - T_Floor
], [0; 0; 0]*deg)
DCUpperWallsScript := stack(DCWestWallLower, DCWestWallUpper, DCEastWallLower, DCEastWallUpper, DCNorthWall, DCDropoffWall, DrainChannelRMRecessWallsEtFloc, Union_All, DrainChannelFrz)
DrainChannelRMRecessWalls
# Drain channel cutouts
FiInletChannelDCCutout := BoxF([
    Plant_Origin[0] - L_Sed - T_PlantWall - W_PlantDC;
    FiInletChannel_Origin[1] - T_PlantWall;
    FiEntranceBox_origin[2] - T_PlantWall
], [
    Plant_Origin[0] - L_Sed - W_PlantDC - 2*T_PlantWall;
    FiInletChannel_Origin[1] + T_PlantWall + L_FiInletChannel;
    Z_Walkway - T_Floor
], [0; 0; 0]*deg)
SedDCCutout := BoxF([
    Plant_Origin[0] - L_Sed;
    Plant_Origin[1] - T_PlantWall;
    Plant_Origin[2] - T_PlantWall - outerradius(ND_SedJetReverser)
], [
    Plant_Origin[0] - L_Sed - T_PlantWall;
    Plant_Origin[1] + N_SedTanks*(W_Sed + T_PlantWall);
    Z_Walkway - T_Floor
], [0; 0; 0]*deg)
FlocDCCutout1 := BoxF([Floc_Origin[0] - L_Floc; Floc_Origin[1]; Floc_Origin[2] - T_FlocSlab], [
    Floc_Origin[0] - L_Floc - T_PlantWall;
    Floc_Origin[1] + N_FlocChannels*(W_FlocChannel + T_PlantWall);
    Z_Walkway - T_Floor
], [0; 0; 0]*deg)
FlocDCCutout2 := BoxF([
    Floc_Origin[0] - L_Floc - T_PlantWall;
    Floc_Origin[1] + N_FlocChannels*(W_FlocChannel + T_PlantWall);
    Floc_Origin[2] - T_FlocSlab
], [
    Floc_Origin[0] - L_Floc + 2*S_Fitting + 2*ConRadius(ND_RMPipe) + T_PlantWall;
    Floc_Origin[1] + N_FlocChannels*(W_FlocChannel + T_PlantWall) - T_PlantWall;
    Z_Walkway - T_Floor
], [0; 0; 0]*deg)
FlocDrainDCCutouts :=
    local ← view("t")
    for i ∈ 0 .. N_FlocChannels - 1
        Cylinder ← CylinderF([
            Floc_Origin[0] - L_Floc + zc;
            FlocDrainElbow_Origin[1] + i*(W_FlocChannel + T_PlantWall);
            FlocDrainElbow_Origin[2]
        ], outerradius(ND_FlocDrain), T_PlantWall + 2*zc, [0; 0]*deg)
        local ← stack(local, Cylinder)
    return local
DrainChannelRMRecessCutout1 := BoxF([
    Plant_Origin[0] - L_Sed - T_PlantWall;
    Et_Origin[1] + W_Et + T_PlantWall - T_ChannelWall;
    PlantUpperDC_Origin[2] - HW_PlantDCMax
], [
    FlocCoupling_Origin[0] + ConRadius(ND_RMPipe) + S_Fitting;
    Floc_Origin[1] + N_FlocChannels*(W_FlocChannel + T_FlocChannelWall) - T_FlocChannelWall + T_PlantWall;
    Z_Walkway - T_Floor + zc
], [0; 0; 0]*deg)
DrainChannelRMRecessCutout1EtFloc := BoxF([Et_Origin[0]; Et_Origin[1] + W_Et + T_PlantWall; PlantUpperDC_Origin[2] - HW_PlantDCMax], [
    Et_Origin[0] - L_Et - T_PlantWall;
    Et_Origin[1] + W_Et + T_PlantWall + L_ChemLeverArmSpace;
    Z_Walkway - T_Floor
], [0; 0; 0]*deg)
DrainChannelRMRecessCutout2EtFloc := BoxF([Et_Origin[0] + T_PlantWall; Et_Origin[1] + W_Et; Et_Origin[2] - T_PlantWall], [Et_Origin[0] - L_Et - T_PlantWall; Et_Origin[1] + W_Et + T_PlantWall; Z_Walkway - T_Floor], [0; 0; 0]*deg)
EtDrainChannelCutout := BoxF([
    FlocCoupling_Origin[0] + ConRadius(ND_RMPipe) + S_Fitting;
    EtDC_Origin[1] + W_EtDC;
    Et_Origin[2] - T_PlantWall
], [
    FlocCoupling_Origin[0] + ConRadius(ND_RMPipe) + S_Fitting + T_ChannelWall;
    EtDC_Origin[1];
    EtDC_Origin[2] - H_EtDC - Slope_EtDC*L_EtDC
], [0; 0; 0]*deg)
DCCutoutScript := stack(FiInletChannelDCCutout, SedDCCutout, FlocDCCutout1, FlocDCCutout2, FlocDrainDCCutouts, DrainChannelRMRecessCutout1EtFloc, DrainChannelRMRecessCutout2EtFloc, GroupDelete, SubtractFromDrainChannel)
DrainChannelRMRecessCutout1
EtDrainChannelCutout
PlantDrainChannelScript := stack(MainDCScript, DCUpperWallsScript, DCCutoutScript)
# Inlet channel masonry
FiInletChannel := Tank(FiInletChannel_Origin, [W_FiInletChannel; L_FiInletChannel; H_FiInletChannel], T_PlantWall)
FiInletChannelBase := BoxF(FiInletChannel_Origin + [T_PlantWall; -T_PlantWall; 0 m], [
    FiInletChannel_Origin[0] - W_FiInletChannel - T_PlantWall;
    FiInletChannel_Origin[1] + L_FiInletChannel + T_PlantWall;
    Z_FiEntranceBottom - T_PlantWall
], [0; 0; 0]*deg)
FiInletChannelWallCut := BoxF([
    FiInletChannel_Origin[0] - W_FiInletChannel - T_FiWeir;
    FiInletChannel_Origin[1];
    Z_FiEntranceBottom - T_PlantWall
], [
    FiInletChannel_Origin[0] - W_FiInletChannel - T_PlantWall;
    FiInletChannel_Origin[1] + W_FiEntrance;
    Z_FiTop
], [0; 0; 0]*deg)
ArrayInletChannelCut := ArrayLast(N_Fi, 1, W_Fi + T_FiWall)
FiInletChannelConScript := stack(FiInletChannelLayer, FiInletChannel, FiInletChannelBase, Union_All, FiInletChannelFrz, FiInletChannelWallCut, ArrayInletChannelCut, GroupDelete, SubtractFromFiInletChannel)
# Inlet pipes from sedimentation tanks
FiEntrancePipeCutout_Origin(N) := [
    FiInletChannel_Origin[0] + T_PlantWall;
    SedOutletHorizPipe_Origin(N)[1];
    SedOutletHorizPipe_Origin(N)[2]
]
FiEntranceElbow_Origin(N) := [
    FiInletChannel_Origin[0] - SocketDepth(ND_SedToFiPipe);
    SedOutletHorizPipe_Origin(N)[1];
    SedOutletHorizPipe_Origin(N)[2] + 0.0001 m
]  # Added 0.0001m to elevation because a tiny film of the masonry layer wasn't being subtracted from above the elbow.
FiInletPipeCutouts :=
    Local ← view("t")
    for i ∈ 1 .. N_SedToFiPipes
        Cylinder ← CylinderF(FiEntrancePipeCutout_Origin(i), outerradius(ND_SedToFiPipe), T_PlantWall, [0; 0]*deg)
        Local ← stack(Local, Cylinder)
    return Local
FiEntranceElbows :=
    Local ← view("t")
    for i ∈ 1 .. N_SedToFiPipes
        Elbow ← ElbowSUBF(FiEntranceElbow_Origin(i), [90; 0; -90]*deg, ND_SedToFiPipe, PS_Default, ["FiInletChannelCon"])
        Local ← stack(Local, Elbow)
    return Local
FiInletChannelEntranceScript := stack(FiInletPipeCutouts, GroupDelete, SubtractFromFiInletChannel, FiEntranceFittingLayer, FiEntranceElbows, FiEntranceFittingFrz)
# Inlet channel drain
FiInletChannelDrainCoupling_Origin := FiInletChannel_Origin + [
    -W_FiInletChannel/2;
    L_FiInletChannel - (S_Fitting + ConRadius(ND_FiInletChannelDrain)) - (W_FiOverflow/2 + ConRadius(ND_FiEntOverflow))*(mod(N_Fi, 2) == 1 and N_Fi ≠ 3);
    -SocketDepth(ND_FiInletChannelDrain)
]
FiInletChannelDrainElbow_Origin := [
    FiInletChannelDrainCoupling_Origin[0] + ElbowRadius(ND_FiInletChannelDrain);
    FiInletChannelDrainCoupling_Origin[1];
    Z_FiEntranceBottom - T_PlantWall - SocketDepth(ND_FiInletChannelDrain) - ElbowRadius(ND_FiInletChannelDrain)
]
L_FiInletChannelDrainVertPipe := FiInletChannelDrainCoupling_Origin[2] - FiInletChannelDrainElbow_Origin[2] - CouplingLength(ND_FiInletChannelDrain) + 2*SocketDepth(ND_FiInletChannelDrain) - ElbowRadius(ND_FiInletChannelDrain)
FiInletChannelDrainCoupling := CouplingSUBF(FiInletChannelDrainCoupling_Origin, [0; -90]*deg, ND_FiInletChannelDrain, PS_Default, ["FiInletChannelCon"])
FiInletChannelDrainElbow := ElbowF(FiInletChannelDrainElbow_Origin, [90; 0; -90]*deg, ND_FiInletChannelDrain, PS_Default)
FiInletChannelDrainVertPipe := PipeSUBF(FiInletChannelDrainCoupling_Origin + [0 m; 0 m; -CouplingLength(ND_FiInletChannelDrain) + 2*SocketDepth(ND_FiInletChannelDrain)], L_FiInletChannelDrainVertPipe, [0; -90]*deg, ND_FiInletChannelDrain, PS_Default, ["FiInletChannelCon"])
FiInletChannelDrainHorizPipe := PipeSUBF(FiInletChannelDrainElbow_Origin, W_FiInletChannel/2 + T_PlantWall - ElbowRadius(ND_FiInletChannelDrain), [180; 0]*deg, ND_FiInletChannelDrain, PS_Default, ["DrainChannelCon"])
FiInletChannelDrainStub := PipeF(FiInletChannelDrainCoupling_Origin, SocketDepth(ND_FiInletChannelDrain) + H_FiInletChannel + 10 cm, [0; 90]*deg, ND_FiInletChannelDrain, PS_Default)
FiInletChannelDrainScript := stack(FiInletChannelDrainFittingLayer, FiInletChannelDrainCoupling, FiInletChannelDrainElbow, FiInletChannelDrainFittingFrz, FiInletChannelDrainPipeLayer, FiInletChannelDrainVertPipe, FiInletChannelDrainHorizPipe, FiInletChannelDrainPipeFrz, FiInletChannelDrainRemovableLayer, FiInletChannelDrainStub, FiInletChannelDrainRemovableFrz)
FiInletChannelScript := stack(FiInletChannelConScript, FiInletChannelEntranceScript, FiInletChannelDrainScript)
# Inlet channel
# Filter box masonry
FiTank := Tank(Fi_origin, Fi_dim, T_FiWall)
FiSiphonManLedgeL := BoxF([
    Fi_origin[0];
    Fi_origin[1] + T_ConcreteMin + ConRadius(ND_FiSiphon) - 2*S_Fitting;
    Z_FiSiphonInlet - ConRadius(ND_FiSiphon) - outerradius(ND_FiSiphon)
], [
    Fi_origin[0] - T_ConcreteMin;
    Fi_origin[1] + T_ConcreteMin + ConRadius(ND_FiSiphon) + 2*S_Fitting;
    Z_FiSiphonInlet - ConRadius(ND_FiSiphon) - outerradius(ND_FiSiphon) - T_ConcreteMin
], [0; 0; 0]*deg)
FiSiphonManLedgeR := BoxF([
    Fi_origin[0] - L_Fi;
    Fi_origin[1] + T_ConcreteMin + ConRadius(ND_FiSiphon) - 2*S_Fitting;
    Z_FiSiphonInlet - ConRadius(ND_FiSiphon) - outerradius(ND_FiSiphon)
], [
    Fi_origin[0] - L_Fi + T_ConcreteMin;
    Fi_origin[1] + T_ConcreteMin + ConRadius(ND_FiSiphon) + 2*S_Fitting;
    Z_FiSiphonInlet - ConRadius(ND_FiSiphon) - outerradius(ND_FiSiphon) - T_ConcreteMin
], [0; 0; 0]*deg)
FiTankScript := stack(FiTankLayer, FiTank, FiSiphonManLedgeL, FiSiphonManLedgeR, Union_All, FiTankFrz)
# Auxiliary box masonry
# Entrance and Exit Boxes
FiEntBox := Tank(FiEntranceBox_origin, FiEntranceBox_dim, T_PlantWall)
FiExitBox := Tank(FiExitBox_origin, FiExitBox_dim, T_PlantWall)
FiEntExitBoxScript := stack(FiEntExitBoxLayer, FiEntBox, FiExitBox)
FiWeirSpaceBase := BoxF(FiEntranceBox_origin, [
    FiEntranceBox_origin[0] - S_FiFlowControlWeirs;
    FiEntranceBox_origin[1] + FiEntranceBox_dim[1];
    Z_FiWeirSpaceBottom
], [0; 0; 0]*deg)
FiSlottedWeir := BoxF(FiEntranceBox_origin + [-S_FiFlowControlWeirs - T_FiWeir; 0 m; 0 m], FiEntranceBox_origin + [-S_FiFlowControlWeirs; FiEntranceBox_dim[1]; H_FiEntrance], [0; 0; 0]*deg)
FiEntranceBoxWallCut := BoxF(FiEntranceBox_origin + [T_FiWeir; -T_PlantWall; -T_PlantWall], FiEntranceBox_origin + [T_PlantWall; W_FiEntrance + T_PlantWall; H_FiEntrance], [0; 0; 0]*deg)
FiEntranceWeirScript :=
    stack(Union_All, FiEntExitBoxFrz, FiEntranceBoxWallCut, GroupDelete, SubtractFromFiEntExitBox) if N_Fi == 1
    stack(FiWeirSpaceBase, FiSlottedWeir, Union_All, FiEntExitBoxFrz, FiEntranceBoxWallCut, GroupDelete, SubtractFromFiEntExitBox) otherwise
FiEntExitMasonryScript := stack(FiEntExitBoxScript, FiEntranceWeirScript)
# Overflow and Distribution Boxes
FiDistBox := Tank(FiDistBox_Origin, FiDistBox_Dim, T_PlantWall)
FiOverflowBox := Tank(FiOverflowBox_Origin, FiOverflowBox_Dim, T_PlantWall)
FiOverflowBoxBase := BoxF([
    FiOverflowBox_Origin[0] + T_PlantWall;
    FiOverflowBox_Origin[1] - T_PlantWall;
    Z_FiEntranceBottom - T_PlantWall
], FiOverflowBox_Origin + [-FiOverflowBox_Dim[0] - T_PlantWall; FiOverflowBox_Dim[1] + T_PlantWall; 0 m], [0; 0; 0]*deg)
FiOverflowDistBoxScript := stack(FiOFDistBoxLayer, FiDistBox, FiOverflowBox, FiOverflowBoxBase, Union_All, FiOFDistBoxFrz)
FiAuxBoxScript := stack(FiEntExitMasonryScript, FiOverflowDistBoxScript)
# Entrance and exit fittings to filter wall
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# This will be the pipe layout in the entrance and exit boxes to allow for 2 90 degree elbows in  Pipes 2 and 3 coming from the entrance box (on the right)
# Entrance 0 Fittings
FiBwInletCoupling_origin := [
    FiEntranceBox_origin[0] - L_FiEntrance + L_FiOverflowWeir - ConRadius(ND_FiBwTrunk);
    FiEntranceBox_origin[1] + W_FiEntrance - ConRadius(ND_FiBwTrunk) - S_Fitting;
    FiEntranceBox_origin[2] - CouplingLength(ND_FiBwTrunk) + SocketDepth(ND_FiBwTrunk) + 0.0001 m
]
FiBwInletTee_origin := [
    FiBwInletCoupling_origin[0];
    FiBwInletCoupling_origin[1];
    Fi_origin[2] + ConRadius(ND_FiBwTrunk) + ShortTeeLength(ND_FiBwTrunk)
]
FiWallBwCoupling_origin := [
    Fi_origin[0] + T_FiWall + CouplingLength(ND_FiBwTrunk) - SocketDepth(ND_FiBwTrunk);
    FiBwInletCoupling_origin[1];
    Fi_origin[2] + ConRadius(ND_FiBwTrunk)
]
FiIn0Adapter_origin := FiBwInletTee_origin + [
    TeeLength(ND_FiBwTrunk)/2 + SocketDepth(ND_FiBwTrunk) + zc + SocketDepth(ND_FiBwTrunkFlushValve);
    0 m;
    -ShortTeeLength(ND_FiBwTrunk)
]
FiEntBoxCoupling0 := CouplingSUBF(FiBwInletCoupling_origin, [0; 90]*deg, ND_FiBwTrunk, PS_Default, ["FiEntExitBoxCon"])
FiInTee0a := TeeF(FiBwInletTee_origin, [0; 0; 90]*deg, ND_FiBwTrunk, PS_Default)
FiInWallCoupling0 := CouplingF(FiWallBwCoupling_origin, [0; 0]*deg, ND_FiBwTrunk, PS_Default)
FiIn0FittingScript := stack(FiEntBoxCoupling0, FiInTee0a, FiInWallCoupling0)
FiIn0Reducer := CylinderF(FiBwInletTee_origin + [TeeLength(ND_FiBwTrunk)/2; 0 m; -ShortTeeLength(ND_FiBwTrunk)], outerdiameter(ND_FiBwTrunk)/2, SocketDepth(ND_FiBwTrunk) + zc, [180; 0]*deg)
FiIn0ReducerSocket := CylinderF(FiBwInletTee_origin + [
    TeeLength(ND_FiBwTrunk)/2 + SocketDepth(ND_FiBwTrunk) + zc - SocketDepth(ND_FiBwTrunkFlushValve);
    0 m;
    -ShortTeeLength(ND_FiBwTrunk)
], outerdiameter(ND_FiBwTrunkFlushValve)/2, ND_FiBwTrunkFlushValve + zc, [180; 0]*deg)
FiIn0ReducerScript := stack(FiReducerLayer, FiIn0Reducer, FiReducerFrz, FiIn0ReducerSocket, GroupDelete, SubtractFromFiReducer)
FiIn0Adapter := MaleAdapterF(FiIn0Adapter_origin, [180; 0]*deg, ND_FiBwTrunkFlushValve, PS_Default)
FiIn0AdapterScript := stack(FiAdapterLayer, FiIn0Adapter, FiAdapterFrz)
# Outlet 0 Fittings
FiExitCoupling0_origin := [
    FiExitBox_origin[0] - T_ConcreteMin - ConRadius(ND_FiTrunk);
    FiBwInletCoupling_origin[1];
    FiExitBox_origin[2] - CouplingLength(ND_FiTrunk) + SocketDepth(ND_FiTrunk) + 0.0001 m
]
FiOutElbow0a_origin := [
    FiExitCoupling0_origin[0];
    FiExitCoupling0_origin[1];
    Fi_origin[2] + ConRadius(ND_FiBwTrunk) + H_FiBottomLayer + 2*H_FiLayer + ElbowRadius(ND_FiTrunk)
]
FiExChanCoupling0 := CouplingSUBF(FiExitCoupling0_origin, [0; 90]*deg, ND_FiTrunk, PS_Default, ["FiEntExitBoxCon"])
FiOutElbow0a := ElbowF(FiOutElbow0a_origin, [0; 0; -90]*deg, ND_FiTrunk, PS_Default)
FiOut0FittingScript := stack(SelectFiEntExitFitting, FiExChanCoupling0, FiOutElbow0a)
# Entrance 1 Fittings
FiInletCoupling1_origin := [
    FiEntranceBox_origin[0] - L_FiEntrance + T_ConcreteMin + ConRadius(ND_FiTrunk);
    FiEntranceBox_origin[1] + W_FiEntrance - ConRadius(ND_FiBwTrunk) - S_Fitting;
    FiEntranceBox_origin[2] - CouplingLength(ND_FiTrunk) + SocketDepth(ND_FiTrunk) + 0.0001 m
]
FiInletElbow1_origin := [
    FiInletCoupling1_origin[0];
    FiInletCoupling1_origin[1];
    Fi_origin[2] + ConRadius(ND_FiBwTrunk) + H_FiBottomLayer + H_FiLayer + ElbowRadius(ND_FiTrunk)
]
FiEntBoxCoupling1 := CouplingSUBF(FiInletCoupling1_origin, [0; 90]*deg, ND_FiTrunk, PS_Default, ["FiEntExitBoxCon"])
FiInElbow1a := ElbowF(FiInletElbow1_origin, [0; 0; -90]*deg, ND_FiTrunk, PS_Default)
FiIn1FittingScript := stack(FiEntBoxCoupling1, FiInElbow1a)
# Outlet 1 Fittings
FiExitCoupling1_origin := [
    FiExitBox_origin[0] - L_FiExit + T_ConcreteMin + ConRadius(ND_FiTrunk);
    FiInletCoupling1_origin[1];
    FiExitBox_origin[2] - CouplingLength(ND_FiTrunk) + SocketDepth(ND_FiTrunk) + 0.0001 m
]
FiOutElbow1a_origin := [
    FiExitCoupling1_origin[0];
    FiExitCoupling1_origin[1];
    Fi_origin[2] + ConRadius(ND_FiBwTrunk) + H_FiBottomLayer + 4*H_FiLayer + ElbowRadius(ND_FiTrunk)
]
FiExBoxCoupling1 := CouplingSUBF(FiExitCoupling1_origin, [0; 90]*deg, ND_FiTrunk, PS_Default, ["FiEntExitBoxCon"])
FiOutElbow1a := ElbowF(FiOutElbow1a_origin, [0; 0; -90]*deg, ND_FiTrunk, PS_Default)
FiOut1FittingScript := stack(FiExBoxCoupling1, FiOutElbow1a)
# Inlet 2 Fittings
FiInletCoupling2_origin := [
    FiEntranceBox_origin[0] - L_FiEntrance + L_FiOverflowWeir - (ConRadius(ND_FiTrunk) + S_Fitting);
    FiEntranceBox_origin[1] + 2*S_Fitting + 3*ConRadius(ND_FiTrunk);
    FiInletCoupling1_origin[2] + 0.0001 m
]
FiInElbow2a_origin := [
    FiInletCoupling2_origin[0];
    FiInletCoupling2_origin[1];
    Fi_origin[2] + ConRadius(ND_FiBwTrunk) + H_FiBottomLayer + 3*H_FiLayer + ElbowRadius(ND_FiTrunk)
]
FiInElbow2b_origin := [
    FiExitCoupling1_origin[0] - 2*ConRadius(ND_FiTrunk) - S_Fitting;
    FiInletCoupling2_origin[1] + ElbowRadius(ND_FiTrunk);
    Fi_origin[2] + ConRadius(ND_FiBwTrunk) + H_FiBottomLayer + 3*H_FiLayer
]
FiInElbow2c_origin := [
    FiInElbow2b_origin[0];
    FiBwInletCoupling_origin[1] - ElbowRadius(ND_FiTrunk);
    FiInElbow2b_origin[2]
]
FiEntBoxCoupling2 := CouplingSUBF(FiInletCoupling2_origin, [0; 90]*deg, ND_FiTrunk, PS_Default, ["FiEntExitBoxCon"])
FiInElbow2a := ElbowF(FiInElbow2a_origin, [0; 0; -90]*deg, ND_FiTrunk, PS_Default)
FiInElbow2b := ElbowF(FiInElbow2b_origin, [180; 0; 0]*deg, ND_FiTrunk, PS_Default)
FiInElbow2c := ElbowF(FiInElbow2c_origin, [0; 0; 0]*deg, ND_FiTrunk, PS_Default)
FiIn2FittingScript := stack(FiEntBoxCoupling2, FiInElbow2a, FiInElbow2b, FiInElbow2c)
# Oulet 2 Fittings (exit box drain)
FiExitCoupling2_origin := [
    FiExitBox_origin[0] - T_ConcreteMin - ConRadius(ND_FiTrunk);
    FiExitBox_origin[1] + T_ConcreteMin + ConRadius(ND_FiTrunk);
    FiExitBox_origin[2] - CouplingLength(ND_FiExitWaste) + SocketDepth(ND_FiExitWaste) + 0.0001 m
]
FiOutElbow2_origin := [
    FiExitCoupling2_origin[0] + ElbowRadius(ND_FiExitWaste);
    FiExitCoupling2_origin[1];
    Z_FiExitDrainOutlet
]
FiExChanCoupling2 := CouplingSUBF(FiExitCoupling2_origin, [0; 90]*deg, ND_FiExitWaste, PS_Default, ["FiEntExitBoxCon"])
FiOutElbow2 := ElbowF(FiOutElbow2_origin, [90; 0; 270]*deg, ND_FiExitWaste, PS_Default)
FiOut2FittingScript := stack(FiExChanCoupling2, FiOutElbow2)
# Inlet 3 Fittings
FiInletCoupling3_origin := [
    FiEntranceBox_origin[0] - L_FiEntrance + T_ConcreteMin + ConRadius(ND_FiTrunk);
    FiEntranceBox_origin[1] + 2*T_ConcreteMin + 3*ConRadius(ND_FiTrunk);
    FiEntranceBox_origin[2] - CouplingLength(ND_FiTrunk) + SocketDepth(ND_FiTrunk) + 0.0001 m
]
FiInElbow3a_origin := [
    FiInletCoupling3_origin[0];
    FiInletCoupling3_origin[1];
    Fi_origin[2] + ConRadius(ND_FiBwTrunk) + H_FiBottomLayer + 5*H_FiLayer + ElbowRadius(ND_FiTrunk)
]
FiInElbow3b_origin := [
    FiExitCoupling1_origin[0] - 2*ConRadius(ND_FiTrunk) - S_Fitting;
    FiInletCoupling3_origin[1] + ElbowRadius(ND_FiTrunk);
    Fi_origin[2] + ConRadius(ND_FiBwTrunk) + H_FiBottomLayer + 5*H_FiLayer
]
FiInElbow3c_origin := [
    FiInElbow3b_origin[0];
    FiBwInletCoupling_origin[1] - ElbowRadius(ND_FiTrunk);
    FiInElbow3b_origin[2]
]
FiEntBoxCoupling3 := CouplingSUBF(FiInletCoupling3_origin, [0; 90]*deg, ND_FiTrunk, PS_Default, ["FiEntExitBoxCon"])
FiInElbow3a := ElbowF(FiInElbow3a_origin, [0; 0; -90]*deg, ND_FiTrunk, PS_Default)
FiInElbow3b := ElbowF(FiInElbow3b_origin, [180; 0; 0]*deg, ND_FiTrunk, PS_Default)
FiInElbow3c := ElbowF(FiInElbow3c_origin, [0; 0; 0]*deg, ND_FiTrunk, PS_Default)
FiIn3FittingScript := stack(FiEntBoxCoupling3, FiInElbow3a, FiInElbow3b, FiInElbow3c, FiEntExitFittingFrz)
# Outlet 3 Fittings
FiExitCoupling3_origin := [
    FiExitBox_origin[0] - L_FiExit + S_Fitting + ConRadius(ND_FiTrunk);
    FiExitBox_origin[1] + T_ConcreteMin + ConRadius(ND_FiTrunk);
    FiExitBox_origin[2] - CouplingLength(ND_FiTrunk) + SocketDepth(ND_FiTrunk) + 0.0001 m
]
FiOut3ElbowA_origin := [
    FiExitCoupling3_origin[0];
    FiExitCoupling3_origin[1] + ElbowRadius(ND_FiTrunk);
    Fi_origin[2] + ConRadius(ND_FiBwTrunk) + H_FiBottomLayer
]
FiOut3ElbowB_origin := [
    FiOut3ElbowA_origin[0] - ElbowRadius(ND_FiTrunk);
    FiExitCoupling0_origin[1];
    Fi_origin[2] + ConRadius(ND_FiBwTrunk) + H_FiBottomLayer
]
FiWallOutTee3_origin := [
    Fi_origin[0] + T_FiWall + SocketDepth(ND_FiTrunk) + TeeLength(ND_FiTrunk)/2;
    FiExitCoupling0_origin[1] + ShortTeeLength(ND_FiTrunk)*cos(AN_FiTrunkValves);
    Fi_origin[2] + ConRadius(ND_FiBwTrunk) + H_FiBottomLayer - ShortTeeLength(ND_FiTrunk)*sin(AN_FiTrunkValves)
]
FiExChanCoupling3 := CouplingSUBF(FiExitCoupling3_origin, [0; 90]*deg, ND_FiTrunk, PS_Default, ["FiEntExitBoxCon"])
FiOut3ElbowA := ElbowF(FiOut3ElbowA_origin, [180; 270; 0]*deg, ND_FiTrunk, PS_Default)
FiOut3ElbowB := ElbowF(FiOut3ElbowB_origin, [-90; 0; 180]*deg, ND_FiTrunk, PS_Default)
FiWallOutTee3 := TeeF(FiWallOutTee3_origin, [0 deg; 0 deg; -AN_FiTrunkValves], ND_FiTrunk, PS_Default)
ArrayFiTrunkValve := stack(view("f"), ArrayLast(N_FiLayer, 1, H_FiLayer), view("t"))
FiOut3FittingScript := stack(FiExChanCoupling3, FiOut3ElbowA, FiOut3ElbowB, FiWallOutTee3, ArrayFiTrunkValve)
FiOut3Reducer := CylinderF(FiWallOutTee3_origin, outerradius(ND_FiTrunk), SocketDepth(ND_FiTrunk) + zc, [-90; 0]*deg)
FiOut3ReducerSocket := CylinderF(FiWallOutTee3_origin + [0 m; SocketDepth(ND_FiTrunk) + zc - SocketDepth(ND_FiTrunkFlushValve); 0 m], outerradius(ND_FiTrunkFlushValve), SocketDepth(ND_FiTrunkFlushValve) + zc, [-90; 0]*deg)
RotateFiTrunkReducer := Rotate3DLast(FiWallOutTee3_origin, "x", -AN_FiTrunkValves)
FiOut3ReducerScript := stack(SelectFiReducer, FiOut3Reducer, RotateFiTrunkReducer, ArrayFiTrunkValve, FiReducerFrz, FiOut3ReducerSocket, RotateFiTrunkReducer, ArrayFiTrunkValve, GroupDelete, SubtractFromFiReducer)
FiOut3Adapter := MaleAdapterF(FiWallOutTee3_origin + [0 m; SocketDepth(ND_FiTrunk) + zc + SocketDepth(ND_FiTrunkFlushValve); 0 m], [-90; 0]*deg, ND_FiTrunkFlushValve, PS_Default)
FiOut3AdapterScript := stack(SelectFiAdapter, FiOut3Adapter, RotateFiTrunkReducer, ArrayFiTrunkValve, FiAdapterFrz)
FiEntExitFittingScript := stack(FiEntExitFittingLayer, FiIn0FittingScript, FiIn1FittingScript, FiIn2FittingScript, FiIn3FittingScript, FiOut0FittingScript, FiOut1FittingScript, FiOut2FittingScript, FiOut3FittingScript, FiEntExitFittingFrz, FiIn0ReducerScript, FiOut3ReducerScript, FiIn0AdapterScript, FiOut3AdapterScript)
# Entrance and exit pipes to filter wall
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# This is all of the piping between filter box, entrance and exit
# In means the pipe goes IN TO THE FILTER
# Out means it comes OUT OF THE FILTER
# Inlet 0 Pipes (backwash)
L_FiInPipe0a := FiBwInletCoupling_origin[2] - FiBwInletTee_origin[2]
L_FiInPipe0b := FiBwInletTee_origin[0] - FiWallBwCoupling_origin[0]
FiInPipe0a := PipeSUBF(FiBwInletCoupling_origin, L_FiInPipe0a, [0; 270]*deg, ND_FiBwTrunk, PS_Default, ["FiEntExitBoxCon"])
FiInPipe0b := PipeF(FiBwInletTee_origin + [-TeeLength(ND_FiBwTrunk)/2; 0 m; -ShortTeeLength(ND_FiBwTrunk)], L_FiInPipe0b, [0; 0]*deg, ND_FiBwTrunk, PS_Default)
FiIn0WallPipe := PipeSUBF(FiWallBwCoupling_origin - [CouplingLength(ND_FiBwTrunk) - 2*SocketDepth(ND_FiBwTrunk); 0 m; 0 m], L_FiManFerncoCoupling/2 + T_FiWall + SocketDepth(ND_FiBwTrunk), [0; 0]*deg, ND_FiBwTrunk, PS_Default, ["FiTankCon"])
FiIn0ValveNipple := PipeF(FiBwInletTee_origin + [
    TeeLength(ND_FiBwTrunk)/2 + SocketDepth(ND_FiBwTrunk) + zc - SocketDepth(ND_FiBwTrunkFlushValve);
    0 m;
    -ShortTeeLength(ND_FiBwTrunk)
], 2*SocketDepth(ND_FiBwTrunkFlushValve), [180; 0]*deg, ND_FiBwTrunkFlushValve, PS_Default)
FiIn0PipeScript := stack(FiInPipe0a, FiInPipe0b, FiIn0WallPipe, FiIn0ValveNipple)
# Inlet 1 Pipes
L_FiInPipe1a := FiInletCoupling1_origin[2] - FiInletElbow1_origin[2]
L_FiInPipe1b := FiInletCoupling1_origin[0] - ElbowRadius(ND_FiTrunk) - FiWallOutTee3_origin[0] - TeeLength(ND_FiTrunk)/2
FiInPipe1a := PipeSUBF(FiInletCoupling1_origin, L_FiInPipe1a, [0; 270]*deg, ND_FiTrunk, PS_Default, ["FiEntExitBoxCon"])
FiInPipe1b := PipeF(FiInletElbow1_origin + [-ElbowRadius(ND_FiTrunk); 0 m; -ElbowRadius(ND_FiTrunk)], L_FiInPipe1b, [0; 0]*deg, ND_FiTrunk, PS_Default)
FiIn1WallPipe := PipeSUBF(FiWallOutTee3_origin + [
    -TeeLength(ND_FiTrunk)/2;
    -ShortTeeLength(ND_FiTrunk)*cos(AN_FiTrunkValves);
    ShortTeeLength(ND_FiTrunk)*sin(AN_FiTrunkValves) + H_FiLayer
], L_FiManFerncoCoupling/2 + T_FiWall + SocketDepth(ND_FiTrunk), [0; 0]*deg, ND_FiTrunk, PS_Default, ["FiTankCon"])
FiIn1PipeScript := stack(FiInPipe1a, FiInPipe1b, FiIn1WallPipe)
# Inlet 2 Pipes
L_FiInPipe2a := FiInletCoupling2_origin[2] - FiInElbow2a_origin[2]
L_FiInPipe2b := FiInletCoupling2_origin[0] - FiInElbow2b_origin[0] - 2*ElbowRadius(ND_FiTrunk)
L_FiInPipe2c := FiInElbow2c_origin[1] - FiInElbow2b_origin[1]
L_FiInPipe2d := FiInElbow2c_origin[0] - FiWallOutTee3_origin[0] - ElbowRadius(ND_FiTrunk) - TeeLength(ND_FiTrunk)/2
FiInPipe2a := PipeSUBF(FiInletCoupling2_origin, L_FiInPipe2a, [0; 270]*deg, ND_FiTrunk, PS_Default, ["FiEntExitBoxCon"])
FiInPipe2b := PipeF(FiInElbow2a_origin + [-ElbowRadius(ND_FiTrunk); 0 m; -ElbowRadius(ND_FiTrunk)], L_FiInPipe2b, [0; 0]*deg, ND_FiTrunk, PS_Default)
FiInPipe2c := PipeF(FiInElbow2b_origin, L_FiInPipe2c, [-90; 0]*deg, ND_FiTrunk, PS_Default)
FiInPipe2d := PipeF(FiInElbow2c_origin + [-ElbowRadius(ND_FiTrunk); ElbowRadius(ND_FiTrunk); 0 m], L_FiInPipe2d, [0; 0]*deg, ND_FiTrunk, PS_Default)
FiIn2WallPipe := PipeSUBF(FiWallOutTee3_origin + [
    -TeeLength(ND_FiTrunk)/2;
    -ShortTeeLength(ND_FiTrunk)*cos(AN_FiTrunkValves);
    ShortTeeLength(ND_FiTrunk)*sin(AN_FiTrunkValves) + 3*H_FiLayer
], L_FiManFerncoCoupling/2 + T_FiWall + SocketDepth(ND_FiTrunk), [0; 0]*deg, ND_FiTrunk, PS_Default, ["FiTankCon"])
FiIn2PipeScript := stack(FiInPipe2a, FiInPipe2b, FiInPipe2c, FiInPipe2d, FiIn2WallPipe)
# Inlet 3 Pipes
L_FiInPipe3a := FiInletCoupling3_origin[2] - FiInElbow3a_origin[2]
L_FiInPipe3b := FiInElbow3a_origin[0] - FiInElbow3b_origin[0] - 2*ElbowRadius(ND_FiTrunk)
L_FiInPipe3c := FiInElbow3c_origin[1] - FiInElbow3b_origin[1]
L_FiInPipe3d := FiInElbow3c_origin[0] - FiWallOutTee3_origin[0] - ElbowRadius(ND_FiTrunk) - TeeLength(ND_FiTrunk)/2
FiInPipe3a := PipeSUBF(FiInletCoupling3_origin, L_FiInPipe3a, [0; 270]*deg, ND_FiTrunk, PS_Default, ["FiEntExitBoxCon"])
FiInPipe3b := PipeF(FiInElbow3a_origin + [-ElbowRadius(ND_FiTrunk); 0 m; -ElbowRadius(ND_FiTrunk)], L_FiInPipe3b, [0; 0]*deg, ND_FiTrunk, PS_Default)
FiInPipe3c := PipeF(FiInElbow3b_origin, L_FiInPipe3c, [-90; 0]*deg, ND_FiTrunk, PS_Default)
FiInPipe3d := PipeF(FiInElbow3c_origin + [-ElbowRadius(ND_FiTrunk); ElbowRadius(ND_FiTrunk); 0 m], L_FiInPipe3d, [0; 0]*deg, ND_FiTrunk, PS_Default)
FiIn3WallPipe := PipeSUBF(FiWallOutTee3_origin + [
    -TeeLength(ND_FiTrunk)/2;
    -ShortTeeLength(ND_FiTrunk)*cos(AN_FiTrunkValves);
    ShortTeeLength(ND_FiTrunk)*sin(AN_FiTrunkValves) + 5*H_FiLayer
], L_FiManFerncoCoupling/2 + T_FiWall + SocketDepth(ND_FiTrunk), [0; 0]*deg, ND_FiTrunk, PS_Default, ["FiTankCon"])
FiIn3PipeScript := stack(FiInPipe3a, FiInPipe3b, FiInPipe3c, FiInPipe3d, FiIn3WallPipe)
# Outlet 0 Pipes
L_FiOutPipe0a := FiExitCoupling0_origin[2] - FiOutElbow0a_origin[2]
L_FiOutPipe0b := FiOutElbow0a_origin[0] - FiWallOutTee3_origin[0] - ElbowRadius(ND_FiTrunk) - TeeLength(ND_FiTrunk)/2
FiOutPipe0a := PipeSUBF(FiExitCoupling0_origin, L_FiOutPipe0a, [0; -90]*deg, ND_FiTrunk, PS_Default, ["FiEntExitBoxCon"])
FiOutPipe0b := PipeF(FiOutElbow0a_origin + [-ElbowRadius(ND_FiTrunk); 0 m; -ElbowRadius(ND_FiTrunk)], L_FiOutPipe0b, [0; 0]*deg, ND_FiTrunk, PS_Default)
FiOut0WallPipe := PipeSUBF(FiWallOutTee3_origin + [
    -TeeLength(ND_FiTrunk)/2;
    -ShortTeeLength(ND_FiTrunk)*cos(AN_FiTrunkValves);
    ShortTeeLength(ND_FiTrunk)*sin(AN_FiTrunkValves) + 2*H_FiLayer
], L_FiManFerncoCoupling/2 + T_FiWall + SocketDepth(ND_FiTrunk), [0; 0]*deg, ND_FiTrunk, PS_Default, ["FiTankCon"])
FiOut0PipeScript := stack(FiOutPipe0a, FiOutPipe0b, FiOut0WallPipe)
# Outlet 1 Pipes
L_FiOutPipe1a := FiExitCoupling1_origin[2] - FiOutElbow1a_origin[2]
L_FiOutPipe1b := FiOutElbow1a_origin[0] - FiWallOutTee3_origin[0] - ElbowRadius(ND_FiTrunk) - TeeLength(ND_FiTrunk)/2
FiOutPipe1a := PipeSUBF(FiExitCoupling1_origin, L_FiOutPipe1a, [0; -90]*deg, ND_FiTrunk, PS_Default, ["FiEntExitBoxCon"])
FiOutPipe1b := PipeF(FiOutElbow1a_origin + [-ElbowRadius(ND_FiTrunk); 0 m; -ElbowRadius(ND_FiTrunk)], L_FiOutPipe1b, [0; 0]*deg, ND_FiTrunk, PS_Default)
FiOut1WallPipe := PipeSUBF(FiWallOutTee3_origin + [
    -TeeLength(ND_FiTrunk)/2;
    -ShortTeeLength(ND_FiTrunk)*cos(AN_FiTrunkValves);
    ShortTeeLength(ND_FiTrunk)*sin(AN_FiTrunkValves) + 4*H_FiLayer
], L_FiManFerncoCoupling/2 + T_FiWall + SocketDepth(ND_FiTrunk), [0; 0]*deg, ND_FiTrunk, PS_Default, ["FiTankCon"])
FiOut1PipeScript := stack(FiOutPipe1a, FiOutPipe1b, FiOut1WallPipe)
# Outlet 2 Pipes (exit box drain)
L_FiOutPipe2a := FiExitCoupling2_origin[2] - FiOutElbow2_origin[2] - ElbowRadius(ND_FiExitWaste)
FiOutPipe2a := PipeSUBF(FiExitCoupling2_origin, L_FiOutPipe2a, [0; -90]*deg, ND_FiExitWaste, PS_Default, ["FiEntExitBoxCon"])
FiOut2PipeScript := FiOutPipe2a
# Outlet 3 Pipes
L_FiOut3PipeZ := FiExitCoupling3_origin[2] - (Fi_origin[2] + outerradius(ND_FiBwManBranch) + H_FiBottomLayer + ElbowRadius(ND_FiTrunk))
L_FiOut3PipeX := FiExitCoupling3_origin[0] - Fi_origin[0] - T_FiWall - ElbowRadius(ND_FiTrunk) - TeeLength(ND_FiTrunk) - SocketDepth(ND_FiTrunk)
L_FiOut3PipeY := FiExitCoupling0_origin[1] - FiExitCoupling3_origin[1] - 2*ElbowRadius(ND_FiTrunk)
FiOut3PipeZ := PipeSUBF([
    FiExitCoupling3_origin[0];
    FiExitCoupling3_origin[1];
    Fi_origin[2] + ConRadius(ND_FiBwTrunk) + H_FiBottomLayer + ElbowRadius(ND_FiTrunk)
], L_FiOut3PipeZ, [0; 90]*deg, ND_FiTrunk, PS_Default, ["FiEntExitBoxCon"])
FiOut3PipeX := PipeF([
    FiExitCoupling3_origin[0] - ElbowRadius(ND_FiTrunk);
    FiExitCoupling0_origin[1];
    Fi_origin[2] + ConRadius(ND_FiBwTrunk) + H_FiBottomLayer
], L_FiOut3PipeX, [0; 0]*deg, ND_FiTrunk, PS_Default)
FiOut3PipeY := PipeF([
    FiExitCoupling3_origin[0];
    FiExitCoupling3_origin[1] + ElbowRadius(ND_FiTrunk);
    Fi_origin[2] + ConRadius(ND_FiBwTrunk) + H_FiBottomLayer
], L_FiOut3PipeY, [270; 0]*deg, ND_FiTrunk, PS_Default)
FiOut3WallPipe := PipeSUBF(FiWallOutTee3_origin + [
    -TeeLength(ND_FiTrunk)/2;
    -ShortTeeLength(ND_FiTrunk)*cos(AN_FiTrunkValves);
    ShortTeeLength(ND_FiTrunk)*sin(AN_FiTrunkValves)
], L_FiManFerncoCoupling/2 + T_FiWall + SocketDepth(ND_FiTrunk), [0; 0]*deg, ND_FiTrunk, PS_Default, ["FiTankCon"])
FiOut3ValveNipple := PipeF(FiWallOutTee3_origin + [0 m; SocketDepth(ND_FiTrunk) + zc - SocketDepth(ND_FiTrunkFlushValve); 0 m], 2*SocketDepth(ND_FiTrunkFlushValve), [-90; 0]*deg, ND_FiTrunkFlushValve, PS_Default)
FiOut3PipeScript := stack(FiOut3PipeZ, FiOut3PipeX, FiOut3PipeY, FiOut3WallPipe, FiOut3ValveNipple, RotateFiTrunkReducer, ArrayFiTrunkValve)
FiEntExitPipeScript := stack(FiEntExitPipeLayer, FiIn0PipeScript, FiIn1PipeScript, FiIn2PipeScript, FiIn3PipeScript, FiOut0PipeScript, FiOut1PipeScript, FiOut2PipeScript, FiOut3PipeScript, FiEntExitPipeFrz)
# Inlet and outlet pipe valves
FiInValve0 := insertdwg(FiGateValveURL, FiBwInletTee_origin + [
    TeeLength(ND_FiBwTrunk)/2 + SocketDepth(ND_FiBwTrunk) + zc + MaleAdapterLength(ND_FiBwTrunkFlushValve) - ValveSocket(ND_FiBwTrunkFlushValve) + ValveLength(ND_FiTrunkFlushValve);
    0 m;
    -ShortTeeLength(ND_FiBwTrunk)
], outerdiameter(ND_FiBwTrunkFlushValve)/(1.16 m), outerdiameter(ND_FiBwTrunkFlushValve)/(1.16 m), 0 deg)
FiOutValve3 := insertdwg(FiGateValveURL, FiWallOutTee3_origin + [
    0 m;
    SocketDepth(ND_FiTrunk) + zc + MaleAdapterLength(ND_FiTrunkFlushValve) - ValveSocket(ND_FiTrunkFlushValve);
    0 m
], 2*outerradius(ND_FiTrunkFlushValve)/(1.16 m), 2*outerradius(ND_FiTrunkFlushValve)/(1.16 m), -90 deg)
RotateFiTrunkValve1 := Rotate3DLast(FiWallOutTee3_origin, "y", 90 deg)
RotateFiTrunkValve2 := Rotate3DLast(FiWallOutTee3_origin, "x", -AN_FiTrunkValves)
ArrayFiTrunkValve := stack(view("f"), ArrayLast(N_FiLayer, 1, H_FiLayer), view("t"))
FiValveScript := stack(FiValveLayer, FiInValve0, FiOutValve3, RotateFiTrunkValve1, RotateFiTrunkValve2, ArrayFiTrunkValve, FiValveFrz)
# Inlet and outlet box pipe stubs
L_FiEntPipeStub := Z_FiEntranceStub - Z_FiEntranceBottom + SocketDepth(ND_FiTrunk)
L_FiExitPipeStub := Z_FiExitStub - Z_FiExitBottom + SocketDepth(ND_FiTrunk)
L_ExitBoxDrainStub := H_FiExit + SocketDepth(ND_FiExitWaste) + 10 cm
FiEnt1PipeStub := PipeF(FiInletCoupling1_origin + [0 m; 0 m; CouplingLength(ND_FiTrunk) - 2*SocketDepth(ND_FiTrunk)], L_FiEntPipeStub, [0; 90]*deg, ND_FiTrunk, PS_Default)
FiEnt2PipeStub := PipeF(FiInletCoupling2_origin + [0 m; 0 m; CouplingLength(ND_FiTrunk) - 2*SocketDepth(ND_FiTrunk)], L_FiEntPipeStub, [0; 90]*deg, ND_FiTrunk, PS_Default)
FiEnt3PipeStub := PipeF(FiInletCoupling3_origin + [0 m; 0 m; CouplingLength(ND_FiTrunk) - 2*SocketDepth(ND_FiTrunk)], L_FiEntPipeStub, [0; 90]*deg, ND_FiTrunk, PS_Default)
FiExit0PipeStub := PipeF(FiExitCoupling0_origin + [0 m; 0 m; CouplingLength(ND_FiTrunk) - 2*SocketDepth(ND_FiTrunk)], L_FiExitPipeStub, [0; 90]*deg, ND_FiTrunk, PS_Default)
FiExit1PipeStub := PipeF(FiExitCoupling1_origin + [0 m; 0 m; CouplingLength(ND_FiTrunk) - 2*SocketDepth(ND_FiTrunk)], L_FiExitPipeStub, [0; 90]*deg, ND_FiTrunk, PS_Default)
FiExit2PipeStub := PipeF(FiExitCoupling2_origin + [0 m; 0 m; CouplingLength(ND_FiExitWaste) - 2*SocketDepth(ND_FiExitWaste)], L_ExitBoxDrainStub, [0; 90]*deg, ND_FiExitWaste, PS_Default)
FiOut3PipeStub := PipeF([
    FiExitCoupling3_origin[0];
    FiExitCoupling3_origin[1];
    FiExitCoupling3_origin[2] + CouplingLength(ND_FiTrunk) - 2*SocketDepth(ND_FiTrunk)
], L_FiExitPipeStub, [0; 90]*deg, ND_FiTrunk, PS_Default)
FiEntExitStubs := stack(FiRemovableLayer, FiEnt1PipeStub, FiEnt2PipeStub, FiEnt3PipeStub, FiExit0PipeStub, FiExit1PipeStub, FiExit2PipeStub, FiOut3PipeStub, FiRemovableFrz)
FiEntExitPlumbingScript := stack(FiEntExitPipeScript, FiEntExitFittingScript, FiEntExitStubs, FiValveScript)
# Auxiliary box plumbing (not filter entrance or exit)
FiOverflowCoupling_Origin := [
    FiOverflowBox_Origin[0] + (-L_FiOverflow/2);
    FiOverflowBox_Origin[1] + W_FiOverflow/2;
    Z_FiOverflowBottom - CouplingLength(ND_FiEntOverflow) + SocketDepth(ND_FiEntOverflow) + 0.0001 m
]
FiOverflowElbow_Origin := [
    FiOverflowCoupling_Origin[0] + ElbowRadius(ND_FiEntOverflow);
    FiOverflowCoupling_Origin[1];
    min(FiOverflowCoupling_Origin[2] + CouplingLength(ND_FiEntOverflow) - SocketDepth(ND_FiEntOverflow) - H_FiEntOverflowDrop, Z_FiEntranceBottom - T_PlantWall - SocketDepth(ND_FiEntOverflow) - ElbowRadius(ND_FiEntOverflow))
]
FiBypassCap_Origin := FiOverflowBox_Origin + [
    -L_FiOverflow + CapHeight(ND_FiBypass) - CapThickness(ND_FiBypass);
    W_FiOverflow/2;
    S_Fitting + ConRadius(ND_FiBypass)
]
FiDistCoupling_Origin := FiDistBox_Origin + [-L_FiExit/2; W_FiOverflow/2; -CouplingLength(ND_DistPipe) + SocketDepth(ND_DistPipe)]
FiDistElbow1_Origin := [FiDistCoupling_Origin[0]; FiDistCoupling_Origin[1]; Z_FiDistPipe + ElbowRadius(ND_DistPipe)]
# Auxiliary box fittings
FiOverflowCoupling := CouplingSUBF(FiOverflowCoupling_Origin, [0; 90]*deg, ND_FiEntOverflow, PS_Default, ["FiOverflowDistBoxCon"])
FiOverflowElbow := ElbowSUBF(FiOverflowElbow_Origin, [90; 0; -90]*deg, ND_FiEntOverflow, PS_Default, ["FiOverflowDistBoxCon"])
FiDistCoupling := CouplingSUBF(FiDistCoupling_Origin, [0; 90]*deg, ND_DistPipe, PS_Default, ["FiOverflowDistBoxCon"])
FiDistElbow1 := ElbowF(FiDistElbow1_Origin, [0; 0; 270]*deg, ND_DistPipe, PS_Default)
FiBypassCap := CapF(FiBypassCap_Origin, [0; 0; 0]*deg, ND_FiBypass)
FiAuxFittingScript := stack(FiAuxFittingLayer, FiOverflowCoupling, FiOverflowElbow, FiAuxFittingFrz, FiDistFittingLayer, FiDistCoupling, FiDistElbow1, FiDistFittingFrz, FiAuxRemovableLayer, FiBypassCap, FiAuxRemovableFrz)
# Auxiliary box pipes
FiBypassPipe := PipeSUBF(FiBypassCap_Origin + [-CapHeight(ND_FiBypass) + CapThickness(ND_FiBypass) + 3 cm; 0 m; 0 m], T_PlantWall + 3 cm, [0; 0]*deg, ND_FiBypass, PS_Default, ["FiOverflowDistBoxCon"])
FiOverflowPipeVert := PipeSUBF(FiOverflowCoupling_Origin, FiOverflowCoupling_Origin[2] - FiOverflowElbow_Origin[2] - ElbowRadius(ND_FiEntOverflow), [0; 270]*deg, ND_FiEntOverflow, PS_Default, ["FiOverflowDistBoxCon"])
FiOverflowPipeStub := PipeF(FiOverflowCoupling_Origin + [0 m; 0 m; CouplingLength(ND_FiEntOverflow) - 2*SocketDepth(ND_FiEntOverflow)], H_FiOverflow + SocketDepth(ND_FiEntOverflow) + 10 cm, [0; 90]*deg, ND_FiEntOverflow, PS_Default)
FiAuxPipeScript := stack(FiAuxPipeLayer, FiBypassPipe, FiOverflowPipeVert, FiAuxPipeFrz, SelectFiAuxRemovables, FiOverflowPipeStub, FiAuxRemovableFrz)
# Distribution pipe start
FiDistPipe1 := PipeSUBF(FiDistCoupling_Origin, FiDistCoupling_Origin[2] - Z_FiDistPipe - ElbowRadius(ND_DistPipe), [0; -90]*deg, ND_DistPipe, PS_Default, ["FiOverflowDistBoxCon"])
FiDistStartScript := stack(FiDistPipeLayer, FiDistPipe1, FiDistPipeFrz)
FiAuxPlumbingScript := stack(FiAuxFittingScript, FiAuxPipeScript, FiDistStartScript)
# Manifold trunks and branch receivers
# Branch Receivers
FiBranchHolder := PipeF([
    Fi_origin[0] - CapThickness(ND_FiBranchHolder) - S_FiManAssembly;
    Fi_origin[1] + ConRadius(ND_FiBwBranchHolder) + S_FiManAssembly;
    Fi_origin[2] + H_FiBottomLayer + ConRadius(ND_FiBwTrunk)
], L_Fi - 2*CapThickness(ND_FiBranchHolder) - 2*S_FiManAssembly, [0; 0]*deg, ND_FiBranchHolder, PS_Default)
FiBranchHolderCapRight := CapF([
    Fi_origin[0] - CapThickness(ND_FiBranchHolder) - S_FiManAssembly;
    Fi_origin[1] + ConRadius(ND_FiBwBranchHolder) + S_FiManAssembly;
    Fi_origin[2] + H_FiBottomLayer + ConRadius(ND_FiBwTrunk)
], [0; 0]*deg, ND_FiBranchHolder)
FiBranchHolderCapLeft := CapF([
    Fi_origin[0] - L_Fi + S_FiManAssembly + CapThickness(ND_FiBranchHolder);
    Fi_origin[1] + ConRadius(ND_FiBwBranchHolder) + S_FiManAssembly;
    Fi_origin[2] + H_FiBottomLayer + ConRadius(ND_FiBwTrunk)
], [180; 0]*deg, ND_FiBranchHolder)
ArrayFiBranchHolder := Array_All(2, 1, W_Fi - 2*ConRadius(ND_FiBwBranchHolder) - 2*S_FiManAssembly)
FiManBranchRecThaw := ThawMultiple(["FiManPipePlu"; "FiManCapPlu"])
FiManBranchRecFrz := FreezeMultiple(["FiManPipePlu"; "FiManCapPlu"])
FiBranchHolderScript := stack(FiManPipeLayer, FiBranchHolder, FiManPipeFrz, FiManCapLayer, FiBranchHolderCapRight, FiBranchHolderCapLeft, FiManCapFrz, FiManBranchRecThaw, ArrayFiBranchHolder, FiManBranchRecFrz)
# Manifold trunks
FiTrunk := PipeF([
    Fi_origin[0] - L_FiManFerncoCoupling/2;
    FiBwInletCoupling_origin[1];
    Fi_origin[2] + H_FiBottomLayer + ConRadius(ND_FiBwTrunk)
], L_FiTrunk, [0; 0]*deg, ND_FiTrunk, PS_Default)
FiTrunkCap := CapF([
    Fi_origin[0] - L_FiManFerncoCoupling/2 - L_FiTrunk;
    FiBwInletCoupling_origin[1];
    Fi_origin[2] + H_FiBottomLayer + ConRadius(ND_FiBwTrunk)
], [180; 0]*deg, ND_FiTrunk)
FiTrunkScript := stack(SelectFiManPipe, FiTrunk, FiManPipeFrz, SelectFiManCap, FiTrunkCap, FiManCapFrz)
# Trunk and branch receiver holes and array
FiTrunkOrifice := CylinderF([
    Fi_origin[0] - L_FiManFerncoCoupling - outerradius(ND_FiBwManBranch);
    Fi_origin[1] + S_FiManAssembly + ConRadius(ND_FiBwBranchHolder);
    Fi_origin[2] + H_FiBottomLayer + ConRadius(ND_FiBwTrunk)
], outerradius(ND_FiManBranch), W_Fi - 2*ConRadius(ND_FiBwBranchHolder) - 2*S_FiManAssembly, [-90; 0]*deg)
ArrayFiTrunkOrifice := ArrayLast(1, N_FiManBranch/2, -B_FiManifoldBranch)
ArrayFiTrunks := array_all(N_FiLayer, 1, H_FiLayer)
FiManTrunkOrificeScript := stack(FiTrunkOrifice, ArrayFiTrunkOrifice, GroupDelete, SubtractFromFiManPipe, FiTrunkOrifice, ArrayFiTrunkOrifice, GroupDelete, SubtractFromFiManCap, SelectFiManPipe, SelectFiManCap, view("f"), ArrayFiTrunks, view("t"), FiManPipeFrz, FiManCapFrz)
# Backwash trunk
FiBwTrunk := PipeF([
    Fi_origin[0] - L_FiManFerncoCoupling/2;
    FiBwInletCoupling_origin[1];
    Fi_origin[2] + ConRadius(ND_FiBwTrunk)
], L_FiBwTrunk, [0; 0]*deg, ND_FiBwTrunk, PS_Default)
FiBwTrunkCap := CapF([
    Fi_origin[0] - L_FiManFerncoCoupling/2 - L_FiBwTrunk;
    FiBwInletCoupling_origin[1];
    Fi_origin[2] + ConRadius(ND_FiBwTrunk)
], [180; 0; 0]*deg, ND_FiBwTrunk)
FiBwManTrunkScript := stack(SelectFiManPipe, FiBwTrunk, FiManPipeFrz, SelectFiManCap, FiBwTrunkCap, FiManCapFrz)
# Backwash branch receivers
FiBwBranchReceiver := PipeF([
    Fi_origin[0] - CapThickness(ND_FiBwBranchHolder) - S_FiManAssembly;
    Fi_origin[1] + ConRadius(ND_FiBwBranchHolder) + S_FiManAssembly;
    Fi_origin[2] + ConRadius(ND_FiBwTrunk)
], L_Fi - 2*CapThickness(ND_FiBranchHolder) - 2*S_FiManAssembly, [0; 0]*deg, ND_FiBwBranchHolder, PS_Default)
FiBwBranchReceiverCapR := CapF([
    Fi_origin[0] - CapThickness(ND_FiBwBranchHolder) - S_FiManAssembly;
    Fi_origin[1] + ConRadius(ND_FiBwBranchHolder) + S_FiManAssembly;
    Fi_origin[2] + ConRadius(ND_FiBwTrunk)
], [0; 0; 0]*deg, ND_FiBwBranchHolder)
FiBwBranchReceiverCapL := CapF([
    Fi_origin[0] - L_Fi + S_FiManAssembly + CapThickness(ND_FiBwBranchHolder);
    Fi_origin[1] + ConRadius(ND_FiBwBranchHolder) + S_FiManAssembly;
    Fi_origin[2] + ConRadius(ND_FiBwTrunk)
], [180; 0; 0]*deg, ND_FiBwBranchHolder)
ArrayFiBwBranchHolder := ArrayLast(2, 1, W_Fi - 2*ConRadius(ND_FiBwBranchHolder) - 2*S_FiManAssembly)
FiBwBranchReceiverScript := stack(SelectFiManPipe, FiBwBranchReceiver, ArrayFiBwBranchHolder, FiManPipeFrz, SelectFiManCap, FiBwBranchReceiverCapR, ArrayFiBwBranchHolder, FiBwBranchReceiverCapL, ArrayFiBwBranchHolder, FiManCapFrz)
# Backwash trunk and branch receiver orifices
FiBwTrunkOrifice := CylinderF([
    Fi_origin[0] - L_FiManFerncoCoupling - outerradius(ND_FiBwManBranch);
    Fi_origin[1] + ConRadius(ND_FiBwBranchHolder) + S_FiManAssembly;
    Fi_origin[2] + ConRadius(ND_FiBwTrunk)
], outerradius(ND_FiBwManBranch), W_Fi - 2*ConRadius(ND_FiBwBranchHolder) - 2*S_FiManAssembly, [-90; 0]*deg)
FiBwTrunkOrificeScript := stack(FiBwTrunkOrifice, ArrayFiTrunkOrifice, GroupDelete, SubtractFromFiManPipe, FiBwTrunkOrifice, ArrayFiTrunkOrifice, GroupDelete, SubtractFromFiManCap)
FiTrunkReceiverScript := stack(FiBranchHolderScript, FiTrunkScript, FiManTrunkOrificeScript, FiBwManTrunkScript, FiBwBranchReceiverScript, FiBwTrunkOrificeScript)
# Flexible couplings
FiFerncoBwCoupling_origin := [Fi_origin[0]; FiBwInletCoupling_origin[1]; Fi_origin[2] + ConRadius(ND_FiBwTrunk)]
FiFerncoCouplings_origin := [
    Fi_origin[0];
    FiBwInletCoupling_origin[1];
    Fi_origin[2] + ConRadius(ND_FiBwTrunk) + H_FiBottomLayer
]
FiFlexBwCoupling := FerncoCouplingF(FiFerncoBwCoupling_origin, [0; 0; 0]*deg, ND_FiBwTrunk, L_FiManFerncoCoupling)
FiFlexCoupling := FerncoCouplingF(FiFerncoCouplings_origin, [0; 0; 0], ND_FiTrunk, L_FiManFerncoCoupling)
ArrayFiManifoldLast := ArrayLast(N_FiLayer, 1, H_FiLayer)
FiFlexCouplingScript := stack(FiFlexCouplingLayer, FiFlexBwCoupling, FiFlexCoupling, view("f"), ArrayFiManifoldLast, view("t"), FiFlexCouplingFrz)
# Manifold branches
FiManBranch := PipeF(Fi_origin + [
    -L_FiManFerncoCoupling - outerradius(ND_FiBwManBranch);
    S_FiManAssembly + ConRadius(ND_FiBwBranchHolder) + outerradius(ND_FiBranchHolder) - L_FiManBranchExt;
    ConRadius(ND_FiBwTrunk) + H_FiBottomLayer
], L_FiManBranch, [-90; 0]*deg, ND_FiManBranch, PS_FiBranch)
FiManBranchSlot := BoxF(Fi_origin + [
    -L_FiManFerncoCoupling - B_FiManifoldBranch/2 - outerradius(ND_FiManBranch);
    S_FiManAssembly + ConRadius(ND_FiBwBranchHolder) + outerradius(ND_FiBranchHolder) + B_FiManSlot/2;
    ConRadius(ND_FiBwTrunk) + H_FiBottomLayer + H_FiManCenterToSlot
], Fi_origin + [
    -L_FiManFerncoCoupling - B_FiManifoldBranch/2 + outerradius(ND_FiManBranch);
    S_FiManAssembly + ConRadius(ND_FiBwBranchHolder) + outerradius(ND_FiBranchHolder) + B_FiManSlot/2 + W_FiManSlots;
    outerradius(ND_FiBwManBranch) + H_FiBottomLayer + outerradius(ND_FiManBranch)
], [0; 0; 0]*deg)
MirrorFiManBranchSlot := MirrorLast([Fi_origin[1] + 0 m; Fi_origin[2] + ConRadius(ND_FiBwTrunk) + H_FiBottomLayer], [Fi_origin[1] + zc; Fi_origin[2] + ConRadius(ND_FiBwTrunk) + H_FiBottomLayer], "N")
ArrayFiManBranchSlot := array_all(N_FiManSlotsPerRow, 1, B_FiManSlot)
SelectFiManBranch := SelectLayer("FiManBranchPlu")
ArrayFiMan := array_all(N_FiLayer, 1, H_FiLayer)
# Do not stack unless you are drawing only the slotted pipes. The slots make the 3D model unmanagable.
FiBranchScriptSlots := stack(FiManBranchLayer, FiManBranch, FiManBranchFrz, FiManBranchSlot, view("r"), MirrorFiManBranchSlot, view("t"), ArrayFiManBranchSlot, GroupDelete, SubtractFromFiManBranch, SelectFiManBranch, BrepAll, view("f"), ArrayFiMan, view("t"))
FiBranchScript := stack(FiManBranchLayer, FiManBranch, view("f"), ArrayFiMan, view("t"))
FiBwManBranch := PipeF(Fi_origin + [
    -L_FiManFerncoCoupling - outerradius(ND_FiBwManBranch);
    S_FiManAssembly + ConRadius(ND_FiBwBranchHolder) + outerradius(ND_FiBwBranchHolder) - L_FiManBranchExt;
    ConRadius(ND_FiBwTrunk)
], L_FiBwManBranch, [-90; 0]*deg, ND_FiBwManBranch, PS_FiBranch)
FiBwManBranchSlot := BoxF(Fi_origin + [
    -L_FiManFerncoCoupling - B_FiManifoldBranch/2 - outerradius(ND_FiBwManBranch);
    S_FiManAssembly + ConRadius(ND_FiBwBranchHolder) + outerradius(ND_FiBwBranchHolder) + B_FiBwManSlot/2;
    ConRadius(ND_FiBwTrunk) + H_FiBwManCenterToSlot
], Fi_origin + [
    -L_FiManFerncoCoupling - B_FiManifoldBranch/2 + outerradius(ND_FiBwManBranch);
    S_FiManAssembly + ConRadius(ND_FiBwBranchHolder) + outerradius(ND_FiBwBranchHolder) + B_FiBwManSlot/2 + W_FiManSlots;
    ConRadius(ND_FiBwTrunk)
], [0; 0; 0]*deg)
ArrayFiBwManBranchSlot := ArrayLast(N_FiBwManSlotsPerRow, 1, B_FiBwManSlot)
MirrorFiManBranches := Mirror3dAll("zx", [Fi_origin[0]; Fi_origin[1] + W_Fi/2], "n")
ArrayManBranches := array_all(1, N_FiManBranch/2, -B_FiManifoldBranch)
# Do not stack unless you are drawing only the slotted pipes. The slots make the 3D model unmanagable.
FiBwBranchScriptSlots := stack(BwManBranch, FiManBranchFrz, FiBwManBranchSlot, ArrayFiBwManBranchSlot, GroupDelete, SubtractFromFiManBranch, SelectFiManBranch, BrepAll, ArrayManBranches, MirrorFiManBranches, FiManBranchFrz)
FiBwBranchScript := stack(FiBwManBranch, ArrayManBranches, MirrorFiManBranches, FiManBranchFrz)
FiManBranchScript := stack(FiBranchScript, FiBwBranchScript)
FiManifoldScript := stack(FiTrunkReceiverScript, FiFlexCouplingScript, FiManBranchScript)
# Manifold wing spacers
# Origins
FiManWingSpacerTee_Origin := [
    Fi_origin[0] - L_FiManFerncoCoupling - outerradius(ND_FiBwManBranch) - B_FiManifoldBranch;
    Fi_origin[1] + ConRadius(ND_FiBwBranchHolder) + S_FiManAssembly;
    Fi_origin[2] + ConRadius(ND_FiBwTrunk) + H_FiBottomLayer + ShortTeeLength(ND_FiBranchHolder) + T_Pipe(ND_FiBranchHolder, PS_Default)
]
T_Pipe(ND_FiBranchHolder, PS_Default)
FiBwManWingSpacerTee_Origin := [
    Fi_origin[0] - L_FiManFerncoCoupling - outerradius(ND_FiBwManBranch) - B_FiManifoldBranch;
    Fi_origin[1] + ConRadius(ND_FiBwBranchHolder) + S_FiManAssembly;
    Fi_origin[2] + ConRadius(ND_FiBwTrunk) + ShortTeeLength(ND_FiManWingSpacer) + T_Pipe(ND_FiBranchHolder, PS_Default)
]
# Upper layer tee
FiManWingSpacerTee := TeeF(FiManWingSpacerTee_Origin, [0; 0; 90]*deg, ND_FiBranchHolder, PS_Default)
FiManWingSpacerTeeCut1 := BoxF(FiManWingSpacerTee_Origin + [
    -TeeLength(ND_FiBranchHolder)/2 - SocketDepth(ND_FiBranchHolder) - zc;
    -ConRadius(ND_FiBranchHolder) - zc;
    -ShortTeeLength(ND_FiBranchHolder) + zc/2
], FiManWingSpacerTee_Origin + [
    TeeLength(ND_FiBranchHolder)/2 + SocketDepth(ND_FiBranchHolder) + zc;
    ConRadius(ND_FiBranchHolder) + zc;
    -ShortTeeLength(ND_FiBranchHolder) - ConRadius(ND_FiBranchHolder) - zc
], [0; 0; 0]*deg)
FiManWingSpacerTeeCut2 := BoxF(FiManWingSpacerTee_Origin + [0 m; 0 m; -ShortTeeLength(ND_FiBranchHolder) + sqrt(2)*outerradius(ND_FiManBranch)], FiManWingSpacerTee_Origin + [
    -outerdiameter(ND_FiManBranch);
    ConRadius(ND_FiBranchHolder) + zc;
    -ShortTeeLength(ND_FiBranchHolder) + sqrt(2)*outerradius(ND_FiManBranch) - outerdiameter(ND_FiManBranch)
], [0; -45; 0]*deg)
FiManWingSpacerTeeCut3 := BoxF(FiManWingSpacerTee_Origin + [
    ConRadius(ND_FiBranchHolder) + zc;
    ConRadius(ND_FiBranchHolder) + zc;
    SocketDepth(ND_FiBranchHolder) + zc
], FiManWingSpacerTee_Origin + [
    -ConRadius(ND_FiBranchHolder) - zc;
    -ConRadius(ND_FiBranchHolder) - zc;
    H_FiLayer/2 - T_Pipe(ND_FiBranchHolder, PS_Default) - ShortTeeLength(ND_FiBranchHolder) - zc/2
], [0; 0; 0]*deg)
FiManWingSpacerTeeCut4 := BoxF(FiManWingSpacerTee_Origin + [
    B_FiManifoldBranch - outerradius(ND_FiManBranch);
    ConRadius(ND_FiBranchHolder) + zc;
    -ShortTeeLength(ND_FiBranchHolder) - T_Pipe(ND_FiBranchHolder, PS_Default)
], FiManWingSpacerTee_Origin + [
    TeeLength(ND_FiBranchHolder)/2 + SocketDepth(ND_FiBranchHolder) + zc;
    -ConRadius(ND_FiBranchHolder) - zc;
    0 m
], [0; 0; 0]*deg)
FiManWingSpacerTeeCut5 := BoxF(FiManWingSpacerTee_Origin + [
    -B_FiManifoldBranch + outerradius(ND_FiManBranch);
    ConRadius(ND_FiBranchHolder) + zc;
    -ShortTeeLength(ND_FiBranchHolder) - T_Pipe(ND_FiBranchHolder, PS_Default)
], FiManWingSpacerTee_Origin + [
    -TeeLength(ND_FiBranchHolder)/2 - SocketDepth(ND_FiBranchHolder) - zc;
    -ConRadius(ND_FiBranchHolder) - zc;
    0 m
], [0; 0; 0]*deg)
MirrorFiManWingSpacerTee := MirrorLast([
    FiManWingSpacerTee_Origin[0];
    Fi_origin[2] + ConRadius(ND_FiBwTrunk) + H_FiBottomLayer + H_FiLayer/2
], [
    FiManWingSpacerTee_Origin[0] + zc;
    Fi_origin[2] + ConRadius(ND_FiBwTrunk) + H_FiBottomLayer + H_FiLayer/2
], "n")
FiManWingSpacerTeeUpperScript := stack(FiManWingSpacerTeeLayer, FiManWingSpacerTee, FiManWingSpacerTeeFrz, FiManWingSpacerTeeCut1, FiManWingSpacerTeeCut2, FiManWingSpacerTeeCut3, FiManWingSpacerTeeCut4, FiManWingSpacerTeeCut5, GroupDelete, SubtractFromFiManWingSpacerTee, SelectFiManWingSpacerTee, view("f"), MirrorFiManWingSpacerTee, view("t"), FiManWingSpacerTeeFrz)
# Upper layer pipe
FiManWingSpacerPipe := PipeF(FiManWingSpacerTee_Origin, H_FiLayer - 2*ShortTeeLength(ND_FiBranchHolder) - 2*T_Pipe(ND_FiBranchHolder, PS_Default), [0; 90]*deg, ND_FiBranchHolder, PS_Default)
FiManWingSpacerPipeUpperScript := stack(FiManWingSpacerPipeLayer, FiManWingSpacerPipe, FiManWingSpacerPipeFrz)
# Array upper layer spacers in Z
ThawFiManWingUpperSpacers := ThawMultiple(["FiManWingSpacerTee"; "FiManWingSpacerPipe"])
ArrayFiManWingSpacerZ := array_all(N_FiLayer - 1, 1, H_FiLayer)
FreezeFiManWingUpperSpacers := FreezeMultiple(["FiManWingSpacerTee"; "FiManWingSpacerPipe"])
FiManWingUpperSpacerScript := stack(FiManWingSpacerTeeUpperScript, FiManWingSpacerPipeUpperScript, ThawFiManWingUpperSpacers, view("f"), ArrayFiManWingSpacerZ, view("t"), FreezeFiManWingUpperSpacers)
# Bottom layer tee
FiBwManWingSpacerTee := TeeF(FiBwManWingSpacerTee_Origin, [0; 0; 90]*deg, ND_FiBranchHolder, PS_Default)
FiBwManWingSpacerTeeCut1 := BoxF(FiBwManWingSpacerTee_Origin + [
    -TeeLength(ND_FiBranchHolder)/2 - SocketDepth(ND_FiBranchHolder) - zc;
    -ConRadius(ND_FiBranchHolder) - zc;
    -ShortTeeLength(ND_FiBranchHolder) + zc/2
], FiBwManWingSpacerTee_Origin + [
    TeeLength(ND_FiBranchHolder)/2 + SocketDepth(ND_FiBranchHolder) + zc;
    ConRadius(ND_FiBranchHolder) + zc;
    -ShortTeeLength(ND_FiBranchHolder) - ConRadius(ND_FiBranchHolder) - zc
], [0; 0; 0]*deg)
FiBwManWingSpacerTeeCut2 := BoxF(FiBwManWingSpacerTee_Origin + [0 m; 0 m; -ShortTeeLength(ND_FiBranchHolder) + sqrt(2)*outerradius(ND_FiBwManBranch)], FiBwManWingSpacerTee_Origin + [
    -outerdiameter(ND_FiBranchHolder);
    ConRadius(ND_FiBranchHolder) + zc;
    -ShortTeeLength(ND_FiBranchHolder) + sqrt(2)*outerradius(ND_FiBwManBranch) - outerdiameter(ND_FiBwManBranch)
], [0; -45; 0]*deg)
FiBwManWingSpacerTeeCut3 :=
    if ShortTeeLength(ND_FiBranchHolder) + SocketDepth(ND_FiBranchHolder) + T_Pipe(ND_FiBranchHolder, PS_Default) > H_FiBottomLayer/2
        BoxF(FiBwManWingSpacerTee_Origin + [
            ConRadius(ND_FiBranchHolder) + zc;
            ConRadius(ND_FiBranchHolder) + zc;
            SocketDepth(ND_FiBranchHolder) + zc
        ], FiBwManWingSpacerTee_Origin + [
            -ConRadius(ND_FiBranchHolder) - zc;
            -ConRadius(ND_FiBranchHolder) - zc;
            H_FiBottomLayer/2 - T_Pipe(ND_FiBranchHolder, PS_Default) - ShortTeeLength(ND_FiBranchHolder) - zc/2
        ], [0; 0; 0]*deg)
    view("t") otherwise
FiBwManWingSpacerTeeCut4 := BoxF(FiBwManWingSpacerTee_Origin + [
    B_FiManifoldBranch - outerradius(ND_FiBwManBranch);
    ConRadius(ND_FiBranchHolder) + zc;
    -ShortTeeLength(ND_FiBranchHolder) - T_Pipe(ND_FiBranchHolder, PS_Default)
], FiBwManWingSpacerTee_Origin + [
    TeeLength(ND_FiBranchHolder)/2 + SocketDepth(ND_FiBranchHolder) + zc;
    -ConRadius(ND_FiBranchHolder) - zc;
    0 m
], [0; 0; 0]*deg)
FiBwManWingSpacerTeeCut5 := BoxF(FiBwManWingSpacerTee_Origin + [
    -B_FiManifoldBranch + outerradius(ND_FiBwManBranch);
    ConRadius(ND_FiBranchHolder) + zc;
    -ShortTeeLength(ND_FiBranchHolder) - T_Pipe(ND_FiBranchHolder, PS_Default)
], FiBwManWingSpacerTee_Origin + [
    -TeeLength(ND_FiBranchHolder)/2 - SocketDepth(ND_FiBranchHolder) - zc;
    -ConRadius(ND_FiBranchHolder) - zc;
    0 m
], [0; 0; 0]*deg)
MirrorFiBwManWingSpacerTee := MirrorLast([FiBwManWingSpacerTee_Origin[0]; Fi_origin[2] + ConRadius(ND_FiBwTrunk) + H_FiBottomLayer/2], [FiBwManWingSpacerTee_Origin[0] + zc; Fi_origin[2] + ConRadius(ND_FiBwTrunk) + H_FiBottomLayer/2], "n")
FiBwManWingSpacerTeeScript := stack(FiBwManWingSpacerTeeLayer, FiBwManWingSpacerTee, FiBwManWingSpacerTeeFrz, FiBwManWingSpacerTeeCut1, FiBwManWingSpacerTeeCut2, FiBwManWingSpacerTeeCut3, FiBwManWingSpacerTeeCut4, FiBwManWingSpacerTeeCut5, GroupDelete, SubtractFromFiBwManWingSpacerTee, SelectFiBwManWingSpacerTee, view("f"), MirrorFiBwManWingSpacerTee, view("t"), FiBwManWingSpacerTeeFrz)
# Bottom layer pipe
FiBwManWingSpacerPipe := PipeF(FiBwManWingSpacerTee_Origin, H_FiBottomLayer - 2*ShortTeeLength(ND_FiManWingSpacer) - 2*T_Pipe(ND_FiBranchHolder, PS_Default), [0; 90]*deg, ND_FiBranchHolder, PS_Default)
FiBwManWingSpacerPipeScript := stack(FiBwManWingSpacerPipeLayer, FiBwManWingSpacerPipe, FiBwManWingSpacerPipeFrz)
# Array in X and mirror in Y
ThawFiManWingSpacers := ThawMultiple(["FiManWingSpacerTee"; "FiManWingSpacerPipe"; "FiBwManWingSpacerTee"; "FiBwManWingSpacerPipe"])
ArrayFiManWingSpacersX := array_all(1, 2, -(N_FiManBranch/2 - 3)*B_FiManifoldBranch)
MirrorFiManWingSpacersY := MirrorAll([Fi_origin[0]; Fi_origin[1] + W_Fi/2], [Fi_origin[0] - zc; Fi_origin[1] + W_Fi/2], "n")
FreezeFiManWingSpacers := FreezeMultiple(["FiManWingSpacerTee"; "FiManWingSpacerPipe"; "FiBwManWingSpacerTee"; "FiBwManWingSpacerPipe"])
FiManWingSpacerXYScript := stack(ThawFiManWingSpacers, ArrayFiManWingSpacersX, MirrorFiManWingSpacersY, FreezeFiManWingSpacers)
FiManWingSpacerScript := stack(FiManWingUpperSpacerScript, FiBwManWingSpacerTeeScript, FiBwManWingSpacerPipeScript, FiManWingSpacerXYScript)
FiAuxScript := stack(FiAuxBoxScript, FiAuxPlumbingScript, FiEntExitPlumbingScript)
# Sand drain
L_FiSandDrainFernco := L_FiManFerncoCoupling + outerradius(ND_FiBwManBranch) + B_FiManifoldBranch/2 - ElbowRadius(ND_FiSandOutlet) - SocketDepth(ND_FiSandOutlet)
FiSandDrainInnerElbow_Origin := Fi_origin + [
    -L_FiManFerncoCoupling - outerradius(ND_FiBwManBranch) - B_FiManifoldBranch/2;
    W_Fi - S_FiManAssembly - 2*ConRadius(ND_FiBranchHolder) - S_Fitting - ConRadius(ND_FiSandOutlet);
    ConRadius(ND_FiBwTrunk) + H_FiBottomLayer + 4.5*H_FiLayer - ElbowRadius(ND_FiSandOutlet)
]
FiSandDrainOuterElbow_Origin := [
    Fi_origin[0] + T_FiWall + SocketDepth(ND_FiSandOutlet) + ElbowRadius(ND_FiSandOutlet);
    FiSandDrainInnerElbow_Origin[1];
    FiSandDrainInnerElbow_Origin[2]
]
FiSandDrainAdapter1_Origin := FiSandDrainOuterElbow_Origin + [0 m; 0 m; -2*SocketDepth(ND_FiSandOutlet)]
FiSandDrainValve_Origin := FiSandDrainAdapter1_Origin + [
    0 m;
    0 m;
    SocketDepth(ND_FiSandOutlet) - MaleAdapterLength(ND_FiSandOutlet) + ValveSocket(ND_FiSandOutlet)
]
FiSandDrainAdapter2_Origin := FiSandDrainAdapter1_Origin + [
    0 m;
    0 m;
    -2*MaleAdapterLength(ND_FiSandOutlet) - ValveLength(ND_FiSandOutlet) + 2*ValveSocket(ND_FiSandOutlet) + 2*SocketDepth(ND_FiSandOutlet)
]
FiSandFlexCoupling_Origin := [
    Fi_origin[0];
    FiSandDrainInnerElbow_Origin[1];
    FiSandDrainInnerElbow_Origin[2] + ElbowRadius(ND_FiSandOutlet)
]
# Elbows
FiSandDrainInnerElbow := ElbowF(FiSandDrainInnerElbow_Origin, [180; 0; -90]*deg, ND_FiSandOutlet, PS_Default)
FiSandDrainOuterElbow := ElbowF(FiSandDrainOuterElbow_Origin, [0; 0; 90]*deg, ND_FiSandOutlet, PS_Default)
FiSandDrainFittingScript := stack(FiSandDrainFittingLayer, FiSandDrainInnerElbow, FiSandDrainOuterElbow, FiSandDrainFittingFrz)
# Pipes
FiSandDrainVertPipe1 := PipeF(FiSandDrainInnerElbow_Origin, FiSandDrainInnerElbow_Origin[2] - Fi_origin[2] - ConRadius(ND_FiBwTrunk) - outerradius(ND_FiBwManBranch), [0; -90]*deg, ND_FiSandOutlet, PS_Default)
FiSandDrainHorizPipe1 := PipeSUBF(FiSandDrainOuterElbow_Origin + [-ElbowRadius(ND_FiSandOutlet); 0 m; ElbowRadius(ND_FiSandOutlet)], T_FiWall + SocketDepth(ND_FiSandOutlet) + L_FiSandDrainFernco/2, [0; 0]*deg, ND_FiSandOutlet, PS_Default, ["FiTankCon"])
FiSandDrainHorizPipe2 := PipeF(FiSandDrainInnerElbow_Origin + [ElbowRadius(ND_FiSandOutlet); 0 m; ElbowRadius(ND_FiSandOutlet)], L_FiManFerncoCoupling + outerradius(ND_FiBwManBranch) + B_FiManifoldBranch/2 - ElbowRadius(ND_FiSandOutlet) - L_FiSandDrainFernco/2, [180; 0]*deg, ND_FiSandOutlet, PS_Default)
FiSandDrainNipple := PipeF(FiSandDrainOuterElbow_Origin, 2*SocketDepth(ND_FiSandOutlet), [0; -90]*deg, ND_FiSandOutlet, PS_Default)
FiSandDrainVertPipe2 := PipeF(FiSandDrainAdapter2_Origin, L_FiSandOutletPipe, [0; -90]*deg, ND_FiSandOutlet, PS_Default)
FiSandDrainPipeScript := stack(FiSandDrainPipeLayer, FiSandDrainVertPipe1, FiSandDrainHorizPipe1, FiSandDrainHorizPipe2, FiSandDrainNipple, FiSandDrainVertPipe2, FiSandDrainPipeFrz)
# Valve
FiSandDrainValve := insertdwg(FiGateValveURL, FiSandDrainValve_Origin, outerdiameter(ND_FiSandOutlet)/(1.16 m), outerdiameter(ND_FiSandOutlet)/(1.16 m), 180 deg)
FiSandDrainValveRotate := Rotate3DLast(FiSandDrainValve_Origin, "y", 90 deg)
FiSandDrainValveScript := stack(FiSandDrainValveLayer, FiSandDrainValve, FiSandDrainValveRotate, FiSandDrainValveFrz)
# Adapters
FiSandDrainAdapter1 := MaleAdapterF(FiSandDrainAdapter1_Origin, [0; -90]*deg, ND_FiSandOutlet, PS_Default)
FiSandDrainAdapter2 := MaleAdapterF(FiSandDrainAdapter2_Origin, [0; 90]*deg, ND_FiSandOutlet, PS_Default)
FiSandDrainAdapterScript := stack(FiSandDrainAdapterLayer, FiSandDrainAdapter1, FiSandDrainAdapter2, FiSandDrainAdapterFrz)
# Flex coupling
FiSandDrainFlexCoupling := FerncoCouplingF(FiSandFlexCoupling_Origin, [0; 0; 0], ND_FiSandOutlet, L_FiSandDrainFernco)
FiSandDrainFlexCouplingScript := stack(SelectFiFlexCoupling, FiSandDrainFlexCoupling, FiFlexCouplingFrz)
FiSandDrainScript := stack(FiSandDrainFittingScript, FiSandDrainPipeScript, FiSandDrainValveScript, FiSandDrainAdapterScript, FiSandDrainFlexCouplingScript)
# Backwash siphon
# Origins
FiSiphonCap1_Origin := [
    Fi_origin[0] - L_Fi + CapThickness(ND_FiSiphon);
    Fi_origin[1] + S_Fitting + ConRadius(ND_FiSiphon);
    Z_FiSiphonInlet - outerradius(ND_FiSiphon)
]
FiSiphonCap2_Origin := [
    Fi_origin[0] - CapThickness(ND_FiSiphon);
    Fi_origin[1] + S_Fitting + ConRadius(ND_FiSiphon);
    Z_FiSiphonInlet - outerradius(ND_FiSiphon)
]
FiSiphonTee1_Origin := [
    Fi_origin[0] - L_Fi/2;
    Fi_origin[1] + S_Fitting + ConRadius(ND_FiSiphon);
    Z_FiSiphonInlet - outerradius(ND_FiSiphon) + ShortTeeLength(ND_FiSiphon)
]
FiSiphonElbow1_Origin := [
    Fi_origin[0] - L_Fi/2 + ElbowRadius(ND_FiSiphon);
    Fi_origin[1] + S_Fitting + ConRadius(ND_FiSiphon);
    Z_FiSiphonThroughWall
]
FiSiphonTee2_Origin := [
    Fi_origin[0] + T_FiWall + SocketDepth(ND_FiSiphon);
    Fi_origin[1] + S_Fitting + ConRadius(ND_FiSiphon);
    Z_FiSiphonThroughWall
]
FiSiphonElbow2_Origin := [
    Fi_origin[0] + T_FiWall + SocketDepth(ND_FiSiphon) + ShortTeeLength(ND_FiSiphon) + ElbowRadius(ND_FiSiphon);
    Fi_origin[1] + S_Fitting + ConRadius(ND_FiSiphon);
    FiWallBwCoupling_origin[2]
]
FiSiphonElbow3_Origin := [
    FiInletChannel_Origin[0] + W_PlantDC/2 - ElbowRadius(ND_FiSiphon);
    Fi_origin[1] + S_Fitting + ConRadius(ND_FiSiphon);
    FiWallBwCoupling_origin[2]
]
FiSiphonFlexCoupling_Origin := [Fi_origin[0]; Fi_origin[1] + S_Fitting + ConRadius(ND_FiSiphon); Z_FiSiphonThroughWall]
# Siphon fittings
FiSiphonManifoldCap1 := CapF(FiSiphonCap1_Origin, [180; 0]*deg, ND_FiSiphon)
FiSiphonManifoldCap2 := CapF(FiSiphonCap2_Origin, [0; 0]*deg, ND_FiSiphon)
FiSiphonTee1 := TeeF(FiSiphonTee1_Origin, [0; 0; 90]*deg, ND_FiSiphon, PS_Default)
FiSiphonElbow1 := ElbowF(FiSiphonElbow1_Origin, [90; 0; 90]*deg, ND_FiSiphon, PS_Default)
FiSiphonTee2 := TeeF(FiSiphonTee2_Origin, [90; 0; 90]*deg, ND_FiSiphon, PS_Default)
FiSiphonElbow2 := ElbowF(FiSiphonElbow2_Origin, [90; 0; 270]*deg, ND_FiSiphon, PS_Default)
FiSiphonElbow3 := ElbowF(FiSiphonElbow3_Origin, [270; 0; 90]*deg, ND_FiSiphon, PS_Default)
FiSiphonFlexCoupling := FerncoCouplingF(FiSiphonFlexCoupling_Origin, [0; 0; 0]*deg, ND_FiSiphon, L_FiManFerncoCoupling)
FiSiphonFittingScript := stack(FiSiphonFittingLayer, FiSiphonManifoldCap1, FiSiphonManifoldCap2, FiSiphonTee1, FiSiphonElbow1, FiSiphonTee2, FiSiphonElbow2, FiSiphonElbow3, FiSiphonFittingFrz, SelectFiFlexCoupling, FiSiphonFlexCoupling, FiFlexCouplingFrz)
# Siphon pipes until drain channel
FiSiphonManifold1 := PipeF(FiSiphonCap1_Origin, FiSiphonTee1_Origin[0] - FiSiphonCap1_Origin[0] - TeeLength(ND_FiSiphon)/2, [180; 0]*deg, ND_FiSiphon, PS_Default)
FiSiphonManifold2 := PipeF(FiSiphonCap2_Origin, FiSiphonCap2_Origin[0] - FiSiphonTee1_Origin[0] - TeeLength(ND_FiSiphon)/2, [0; 0]*deg, ND_FiSiphon, PS_Default)
FiSiphonVertPipe1 := PipeF(FiSiphonTee1_Origin, FiSiphonElbow1_Origin[2] - FiSiphonTee1_Origin[2] - ElbowRadius(ND_FiSiphon), [0; 90]*deg, ND_FiSiphon, PS_Default)
FiSiphonHorizPipe1 := PipeF(FiSiphonElbow1_Origin, FiSiphonFlexCoupling_Origin[0] - FiSiphonElbow1_Origin[0] - L_FiManFerncoCoupling/2, [180; 0]*deg, ND_FiSiphon, PS_Default)
FiSiphonHorizPipe2 := PipeSUBF(FiSiphonTee2_Origin, FiSiphonTee2_Origin[0] - FiSiphonFlexCoupling_Origin[0] + L_FiManFerncoCoupling/2 - 1 mm, [0; 0]*deg, ND_FiSiphon, PS_Default, ["FiTankCon"])
# Subtract 1mm from the length so it doesn't later get unioned with the other horizontal pipe in the flexible coupling when the orifices are subtracted.
FiSiphonVertPipe2 := PipeF(FiSiphonTee2_Origin + [ShortTeeLength(ND_FiSiphon); 0 m; -TeeLength(ND_FiSiphon)/2], FiSiphonTee2_Origin[2] - FiSiphonElbow2_Origin[2] - TeeLength(ND_FiSiphon)/2 - ElbowRadius(ND_FiSiphon), [0; -90]*deg, ND_FiSiphon, PS_Default)
FiSiphonHorizPipe3 := PipeF(FiSiphonElbow3_Origin, FiSiphonElbow3_Origin[0] - FiSiphonElbow2_Origin[0], [0; 0]*deg, ND_FiSiphon, PS_Default)
FiSiphonPipeScript := stack(FiSiphonPipeLayer, FiSiphonManifold1, FiSiphonManifold1, FiSiphonManifold2, FiSiphonVertPipe1, FiSiphonHorizPipe1, FiSiphonHorizPipe2, FiSiphonVertPipe2, FiSiphonHorizPipe3, FiSiphonPipeFrz)
# Siphon manifold orifices
FiSiphonManOrifice := CylinderF([
    Fi_origin[0] - CapThickness(ND_FiSiphon) - B_FiSiphonManOrifices/2;
    Fi_origin[1] + S_Fitting + ConRadius(ND_FiSiphon);
    Z_FiSiphonInlet - outerradius(ND_FiSiphon)
], D_FiSiphonManOrifices/2, ConRadius(ND_FiSiphon) + zc, [0; 90]*deg)
ArrayFiSiphonManOrifices := array_all(1, N_FiSiphonManOrifices/2, -B_FiSiphonManOrifices)
MirrorFiSiphonManOrifices := Mirror3dAll("yz", [Fi_origin[0] - L_Fi/2; 0 m], "n")
FiSiphonOrifices := stack(FiSiphonManOrifice, ArrayFiSiphonManOrifices, MirrorFiSiphonManOrifices)
FiSiphonManOrificeScript := stack(FiSiphonOrifices, GroupDelete, SubtractFromFiSiphonPipe, FiSiphonOrifices, GroupDelete, SubtractFromFiSiphonFitting)
# Siphon air valve
FiSiphonReducer_Origin := FiSiphonTee2_Origin + [ShortTeeLength(ND_FiSiphon); 0 m; TeeLength(ND_FiSiphon)/2]
FiSiphonAirElbow1_Origin := FiSiphonReducer_Origin + [0 m; 0 m; SocketDepth(ND_FiSiphon) + zc + SocketDepth(ND_FiSiphonAirValve)]
FiSiphonAirValve_Origin := [Fi_origin[0] + T_FiWall + outerradius(3 in); FiSiphonReducer_Origin[1]; Z_Walkway + S_Fitting]
FiSiphonAirValveAdapter_Origin := FiSiphonAirValve_Origin + [0 m; 0 m; -MaleAdapterLength(ND_FiSiphonAirValve) + SocketDepth(ND_FiSiphonAirValve)]
FiSiphonAirElbow2_Origin := [
    FiSiphonAirValve_Origin[0];
    FiSiphonAirValve_Origin[1];
    FiSiphonAirElbow1_Origin[2] + 2*ElbowRadius(ND_FiSiphonAirValve)
]
FiSiphonReducer := CylinderF(FiSiphonReducer_Origin, outerradius(ND_FiSiphon), SocketDepth(ND_FiSiphon) + zc, [0; 90]*deg)
FiSiphonReducerSocket := CylinderF(FiSiphonReducer_Origin + [0 m; 0 m; SocketDepth(ND_FiSiphon) + zc - SocketDepth(ND_FiSiphonAirValve)], outerradius(ND_FiSiphonAirValve), SocketDepth(ND_FiSiphonAirValve) + zc, [0; 90]*deg)
FiSiphonReducerScript := stack(SelectFiReducer, FiSiphonReducer, FiReducerFrz, FiSiphonReducerSocket, GroupDelete, SubtractFromFiReducer)
FiSiphonAirReleaseVertPipe1 := PipeF(FiSiphonReducer_Origin + [0 m; 0 m; SocketDepth(ND_FiSiphon) + zc - SocketDepth(ND_FiSiphonAirValve)], 2*SocketDepth(ND_FiSiphonAirValve), [0; 90]*deg, ND_FiSiphonAirValve, PS_Modules)
FiSiphonAirReleaseHorizPipe := PipeF(FiSiphonAirElbow1_Origin + [-ElbowRadius(ND_FiSiphonAirValve); 0 m; ElbowRadius(ND_FiSiphonAirValve)], FiSiphonAirElbow1_Origin[0] - FiSiphonAirElbow2_Origin[0] - 2*ElbowRadius(ND_FiSiphonAirValve), [0; 0]*deg, ND_FiSiphonAirValve, PS_Modules)
FiSiphonAirReleaseVertPipe2 := PipeF(FiSiphonAirElbow2_Origin, FiSiphonAirValveAdapter_Origin[2] - FiSiphonAirElbow2_Origin[2], [0; 90]*deg, ND_FiSiphonAirValve, PS_Modules)
FiSiphonAirReleasePipeScript := stack(SelectFiSiphonPipe, FiSiphonAirReleaseVertPipe1, FiSiphonAirReleaseHorizPipe, FiSiphonAirReleaseVertPipe2, FiSiphonPipeFrz)
FiSiphonAirReleaseAdapter := MaleAdapterF(FiSiphonAirValveAdapter_Origin, [0; 90]*deg, ND_FiSiphonAirValve, PS_Modules)
FiSiphonAirReleaseAdapterScript := stack(SelectFiAdapter, FiSiphonAirReleaseAdapter, FiAdapterFrz)
FiSiphonAirValve := insertdwg(FiBalleValveURL, FiSiphonAirValve_Origin, outerdiameter(ND_FiSiphonAirValve)/(125 in), outerdiameter(ND_FiSiphonAirValve)/(125 in), 0 deg)
FiSiphonAirValveScript := stack(FiSiphonValveLayer, FiSiphonAirValve, FiSiphonValveFrz)
FiSiphonAirElbow1 := ElbowF(FiSiphonAirElbow1_Origin, [0; 0; 90]*deg, ND_FiSiphonAirValve, PS_Modules)
FiSiphonAirElbow2 := ElbowF(FiSiphonAirElbow2_Origin, [180; 0; 90]*deg, ND_FiSiphonAirValve, PS_Modules)
FiSiphonAirReleaseFittingScript := stack(SelectFiSiphonFitting, FiSiphonAirElbow1, FiSiphonAirElbow2, FiSiphonFittingFrz)
FiSiphonAirReleaseScript := stack(FiSiphonReducerScript, FiSiphonAirReleasePipeScript, FiSiphonAirReleaseAdapterScript, FiSiphonAirValveScript, FiSiphonAirReleaseFittingScript)
FiSiphonScript := stack(FiSiphonFittingScript, FiSiphonPipeScript, FiSiphonManOrificeScript, FiSiphonAirReleaseScript)
# Removable weir pieces
FiEntranceWeirStopGate := BoxF([
    FiEntranceBox_origin[0] + T_FiWeir/2 - T_Acrylic/2;
    FiEntranceBox_origin[1] + W_FiEntrance/2 - W_FiStopGate/2 - zc;
    Z_FiEntranceWeir - H_FiStopGate
], [
    FiEntranceBox_origin[0] + T_FiWeir/2 + T_Acrylic/2;
    FiEntranceBox_origin[1] + W_FiEntrance/2 + W_FiStopGate/2 + zc;
    Z_FiEntranceWeir
], [0; 0; 0]*deg)
FiEntranceWeirSlotStoppers := BoxF([
    FiEntranceBox_origin[0] - S_FiFlowControlWeirs - T_FiWeir/2 - T_Acrylic/2;
    FiEntranceBox_origin[1] + W_FiEntrance/2 - W_FiBwFlowControl/2 - zc;
    Z_FiWeirSpaceBottom
], [
    FiEntranceBox_origin[0] - S_FiFlowControlWeirs - T_FiWeir/2 + T_Acrylic/2;
    FiEntranceBox_origin[1] + W_FiEntrance/2 + W_FiBwFlowControl/2 + zc;
    Z_FiWeirSpaceBottom + H_FiSlotStopper
], [0; 0; 0]*deg)
ArrayFiSlotStopper := ArrayLast(N_FiSlotStopper, 1, H_FiSlotStopper)
FiAirRemovalBaffle := BoxF([
    FiEntranceBox_origin[0] - (1 + (N_Fi > 1))*S_FiFlowControlWeirs - (N_Fi > 1)*T_FiWeir - T_Acrylic;
    FiEntranceBox_origin[1] - zc;
    Z_FiEntranceBottom + H_FiAirRemovalGap
], FiEntranceBox_origin + [
    -(1 + (N_Fi > 1))*S_FiFlowControlWeirs - (N_Fi > 1)*T_FiWeir;
    FiEntranceBox_dim[1] + zc;
    H_FiEntrance
], [0; 0; 0]*deg)
FiRemovableWeirScript :=
    stack(FiRemovableBaffleLayer, FiEntranceWeirStopGate, FiEntranceWeirSlotStoppers, view("f"), ArrayFiSlotStopper, view("t"), FiAirRemovalBaffle, FiRemovableBaffleFrz) if N_Fi > 1
    stack(FiRemovableBaffleLayer, FiAirRemovalBaffle, FiRemovableBaffleFrz) otherwise
# Array filter and union masonry
ThawFilter := ThawMultiple(["Fi*"])
FiArray1Frz := ["FiAuxPipePlu"; "FiAuxFittingPlu"; "FiAuxRemovablePlu"; "FiDistPipePlu"; "FiDistFittingPlu"; "FiOverflowDistBoxCon"; "FiInletChannelCon"; "FiInletFittingsPlu"; "FiInletPipePlu"; "FiEntranceFittingPlu"; "FiInletChannelDrainFittingPlu"; "FiInletChannelDrainPipePlu"; "FiInletChannelDrainRemovablePlu"]
FreezeFiPieces := FreezeMultiple(FiArray1Frz)
ArrayFi1 := Array_All(N_Fi, 1, W_Fi + T_FiWall)
FreezeFi := FreezeMultiple(["Fi*"])
FiArray2Thw := ["FiAuxPipePlu"; "FiAuxFittingPlu"; "FiAuxRemovablePlu"; "FiDistPipePlu"; "FiDistFittingPlu"; "FiOverflowDistBoxCon"]
ThawFiPieces := ThawMultiple(FiArray2Thw)
N_DistOverflow := ceil(N_Fi/2)
N_FiPeninsulas := (ceil(N_Fi/2) - 1)*(N_Fi > 3)
ArrayFi2 := Array_All(N_DistOverflow, 1, (W_Fi + T_FiWall)*(1 + (N_Fi > 3)))
ThawFilterConcrete := ThawMultiple(["Fi*Con"])
RenameFilterConcrete :=
    RenameLayer("FiEntExitBoxCon", "FiCon") if N_Fi == 2
    RenameLayer("FiOverflowDistBoxCon", "FiCon") otherwise
GroupFilterConcrete := GroupAll("FiCon")
FiArrayScript :=
    stack(ThawFilterConcrete, Union_All, RenameFilterConcrete, GroupFilterConcrete, FreezeFi) if N_Fi == 1
    stack(ThawFilter, FreezeFiPieces, ArrayFi1, FreezeFi, ThawFiPieces, ArrayFi2, FreezeFi, ThawFilterConcrete, Union_All, RenameFilterConcrete, GroupFilterConcrete, FreezeFi) otherwise
# Overflow, inlet and distribution weirs
# Overflow/Dist cutouts
FiOverflowWeirCutouts :=
    local ← view("t")
    for i ∈ 0 .. min(N_Fi - 1, 1)
        Box ← BoxF([
            FiOverflowBox_Origin[0] - (L_FiOverflow - L_FiOverflowWeir);
            FiOverflowBox_Origin[1] - T_PlantWall + i*(W_FiOverflow + T_PlantWall) - zc;
            Z_FiOverflowWeir
        ], FiOverflowBox_Origin + [-L_FiOverflow; i*(W_FiOverflow + T_PlantWall) + zc; H_FiEntrance], [0; 0; 0]*deg)
        Array ← ArrayLast(ceil((N_Fi - i*(N_Fi ≠ 3))/2), 1, (1 + (N_Fi > 3))*(W_Fi + T_FiWall))
        local ← stack(local, Box, Array)
    local ← stack(local, GroupDelete, SubtractFromFiCon)
    return local
FiDistCutouts :=
    local ← view("t")
    for i ∈ 0 .. min(N_Fi - 1, 1)
        Box ← BoxF(FiDistBox_Origin + [0 m; -T_PlantWall + i*(W_FiOverflow + T_PlantWall) - zc; 0 m], FiDistBox_Origin + [-L_FiExit; i*(W_FiOverflow + T_PlantWall) + zc; H_FiEntrance], [0; 0; 0]*deg)
        Array ← ArrayLast(ceil((N_Fi - i*(N_Fi ≠ 3))/2), 1, (1 + (N_Fi > 3))*(W_Fi + T_FiWall))
        local ← stack(local, Box, Array)
    local ← stack(local, GroupDelete, SubtractFromFiCon)
    return local
# Entrance box cutouts
FiEntranceWeirCutout1 := BoxF([FiEntranceBox_origin[0]; FiEntranceBox_origin[1]; Z_FiEntranceWeir], FiEntranceBox_origin + [T_FiWeir; FiEntranceBox_dim[1]; H_FiEntrance], [0; 0; 0]*deg)
# Cuts entire entrance weir top down to Z.FiEntranceWeir
FiEntranceWeirCutout2 := BoxF([
    FiEntranceBox_origin[0];
    FiEntranceBox_origin[1] + W_FiEntrance/2 - W_FiStopGate/2;
    Z_FiEntranceWeir - H_FiStopGate
], FiEntranceBox_origin + [T_FiWeir; W_FiEntrance/2 + W_FiStopGate/2; H_FiEntrance], [0; 0; 0]*deg)  # Cuts out space for removable stop gate in entrance weir
FiStopGateSlot := BoxF([
    FiEntranceBox_origin[0] + T_FiWeir/2 - T_Acrylic/2;
    FiEntranceBox_origin[1] + W_FiEntrance/2 - W_FiStopGate/2 - zc;
    Z_FiEntranceWeir - H_FiStopGate
], FiEntranceBox_origin + [T_FiWeir/2 + T_Acrylic/2; W_FiEntrance/2 + W_FiStopGate/2 + zc; H_FiEntrance], [0; 0; 0]*deg)
FiWeirFlowControlSlot := BoxF([
    FiEntranceBox_origin[0] - S_FiFlowControlWeirs;
    FiEntranceBox_origin[1] + W_FiEntrance/2 - W_FiBwFlowControl/2;
    Z_FiWeirSpaceBottom
], [
    FiEntranceBox_origin[0] - S_FiFlowControlWeirs - T_FiWeir;
    FiEntranceBox_origin[1] + W_FiEntrance/2 + W_FiBwFlowControl/2;
    Z_FiTop
], [0; 0; 0]*deg)
FiFlowControlStopperSlot := BoxF([
    FiEntranceBox_origin[0] - S_FiFlowControlWeirs - T_FiWeir/2 - T_Acrylic/2;
    FiEntranceBox_origin[1] + W_FiEntrance/2 - W_FiBwFlowControl/2 - zc;
    Z_FiWeirSpaceBottom
], [
    FiEntranceBox_origin[0] - S_FiFlowControlWeirs - T_FiWeir/2 + T_Acrylic/2;
    FiEntranceBox_origin[1] + W_FiEntrance/2 + W_FiBwFlowControl/2 + zc;
    Z_FiTop
], [0; 0; 0]*deg)
FiFlowControlAirBaffleSlot := BoxF([
    FiEntranceBox_origin[0] - (1 + (N_Fi > 1))*S_FiFlowControlWeirs - T_FiWeir*(N_Fi > 1) - T_Acrylic;
    FiEntranceBox_origin[1] - zc;
    Z_FiEntranceBottom + H_FiAirRemovalGap
], FiEntranceBox_origin + [
    -(1 + (N_Fi > 1))*S_FiFlowControlWeirs - T_FiWeir*(N_Fi > 1);
    FiEntranceBox_dim[1] + zc;
    H_FiEntrance
], [0; 0; 0]*deg)
ArrayFiEntBoxCutouts := array_all(N_Fi, 1, W_Fi + T_FiWall)
FiBoxCutoutScript :=
    stack(FiOverflowWeirCutouts, FiDistCutouts, FiEntranceWeirCutout1, FiEntranceWeirCutout2, FiStopGateSlot, FiWeirFlowControlSlot, FiFlowControlStopperSlot, FiFlowControlAirBaffleSlot, ArrayFiEntBoxCutouts, GroupDelete, SubtractFromFiCon) if N_Fi > 1
    stack(FiOverflowWeirCutouts, FiDistCutouts, FiEntranceWeirCutout1, FiFlowControlAirBaffleSlot, GroupDelete, SubtractFromFiCon) otherwise
# Distribution barriers
FiDistBarrier1 := WedgeF(FiDistBox_Origin + [0 m; W_FiOverflow/2 - ConRadius(ND_DistPipe); 0 m], FiDistBox_Origin + [-T_PlantWall; W_FiOverflow/2 - ConRadius(ND_DistPipe) + L_FiExit; H_FiDistBarrier], [90; 0; 0]*deg)
FiDistBarrier2 := WedgeF(FiDistBox_Origin + [0 m; W_FiOverflow/2 + ConRadius(ND_DistPipe); 0 m], FiDistBox_Origin + [-T_PlantWall; W_FiOverflow/2 + ConRadius(ND_DistPipe) - L_FiExit; H_FiDistBarrier], [-90; 0; 0]*deg)
ArrayFiDistBarrier1 := ArrayLast(ceil(N_Fi/2), 1, (1 + (N_Fi > 3))*(W_Fi + T_FiWall))
ArrayFiDistBarrier2 := ArrayLast(ceil((N_Fi - (N_Fi ≠ 3))/2), 1, (1 + (N_Fi > 3))*(W_Fi + T_FiWall))
FiDistBarriers :=
    FiDistBarrier1 if N_Fi == 1
    stack(FiDistBarrier1, ArrayFiDistBarrier1, FiDistBarrier2, ArrayFiDistBarrier2) otherwise
FiDistBarrierScript := stack(SelectFiCon, FiDistBarriers, Union_All, FiConFrz)
# Finish distribution plumbing
FiDistElbow2_Origin := [
    min(FiDistBox_Origin[0] - L_FiExit - T_PlantWall - SocketDepth(ND_DistPipe), FiDistElbow1_Origin[0] - ElbowRadius(ND_DistPipe) - 2*SocketDepth(ND_DistPipe) - max(0 m, ShortTeeLength(ND_DistPipe) - ElbowRadius(ND_DistPipe)));
    FiDistBox_Origin[1] + W_FiOverflow/2 + (W_Fi + T_FiWall)*(N_Fi == 3) + (W_Fi + T_FiWall)*(N_Fi - 1 - (mod(N_Fi, 2) == 0))*(N_Fi > 3);
    Z_FiDistPipe
]
FiDistTee_Origin := [
    FiDistElbow2_Origin[0] + (ShortTeeLength(ND_DistPipe) - ElbowRadius(ND_DistPipe));
    FiDistBox_Origin[1] + W_FiOverflow/2;
    Z_FiDistPipe
]
FiDistPipeFinal_Origin := [
    FiDistElbow2_Origin[0] - ElbowRadius(ND_DistPipe);
    FiDistBox_Origin[1] + W_FiOverflow/2 - ElbowRadius(ND_DistPipe)*(N_Fi ≤ 2) - ShortTeeLength(ND_DistPipe)*(N_Fi > 2);
    Z_FiDistPipe
]
# Finish distribution fittings
FiDistElbow2 := ElbowF(FiDistElbow2_Origin, [90; 0; 0]*deg, ND_DistPipe, PS_Default)
FiDistTee := TeeF(FiDistTee_Origin, [270; 0; 0]*deg, ND_DistPipe, PS_Default)
ArrayFiDistTee := ArrayLast(floor((N_Fi - 1)/2), 1, 2*(W_Fi + T_FiWall))
FiDistFinishFittingScript :=
    stack(SelectFiDistFitting, FiDistElbow2, FiDistFittingFrz) if N_Fi ≤ 2
    stack(SelectFiDistFitting, FiDistElbow2, FiDistTee, ArrayFiDistTee, FiDistFittingFrz) otherwise
# Finish distribution piping
FiDistPipeXa := PipeF(FiDistElbow1_Origin + [
    -ElbowRadius(ND_DistPipe);
    (W_Fi + T_FiWall)*(N_Fi == 3) + (W_Fi + T_FiWall)*(N_Fi - 1 - (mod(N_Fi, 2) == 0))*(N_Fi > 3);
    -ElbowRadius(ND_DistPipe)
], FiDistElbow1_Origin[0] - FiDistElbow2_Origin[0] - ElbowRadius(ND_DistPipe), [0; 0]*deg, ND_DistPipe, PS_Default)
FiDistPipeXb := PipeF(FiDistElbow1_Origin + [-ElbowRadius(ND_DistPipe); 0 m; -ElbowRadius(ND_DistPipe)], FiDistElbow1_Origin[0] - FiDistTee_Origin[0] - ElbowRadius(ND_DistPipe), [0; 0]*deg, ND_DistPipe, PS_Default)
FiDistPipeX :=
    FiDistPipeXa if N_Fi ≤ 2
    stack(FiDistPipeXa, FiDistPipeXb, ArrayFiDistTee) otherwise
FiDistPipeYa := PipeF(FiDistElbow2_Origin + [-ElbowRadius(ND_DistPipe); -ElbowRadius(ND_DistPipe); 0 m], (W_Fi + T_FiWall)*(1 + (N_Fi > 3)) - ElbowRadius(ND_DistPipe) - TeeLength(ND_DistPipe)/2, [90; 0]*deg, ND_DistPipe, PS_Default)
# Between elbow and tee, only for N.Fi > 2
FiDistPipeYb := PipeF(FiDistTee_Origin + [-ShortTeeLength(ND_DistPipe); TeeLength(ND_DistPipe)/2; 0 m], (W_Fi + T_FiWall)*2 - TeeLength(ND_DistPipe), [-90; 0]*deg, ND_DistPipe, PS_Default)
# Between two tees, only for N.Fi > 4
ArrayFiDistPipeYb := ArrayLast(1, floor((N_Fi - 3)/2), 2*(W_Fi + T_FiWall))
FiDistPipeYc := PipeF(FiDistPipeFinal_Origin, W_FiOverflow/2 + 2*T_PlantWall + W_FiEntrance + 50 cm, [90; 0]*deg, ND_DistPipe, PS_Default)  # Leaving the plant
FiDistPipeY :=
    FiDistPipeYc if N_Fi ≤ 2
    stack(FiDistPipeYc, FiDistPipeYa) if 2 < N_Fi ≤ 4
    stack(FiDistPipeYc, FiDistPipeYa, FiDistPipeYb, ArrayFiDistPipeYb) if N_Fi > 4
FiDistFinishPipeScript := stack(SelectFiDistPipe, FiDistPipeX, FiDistPipeY, FiDistPipeFrz)
FiDistFinishScript := stack(FiDistFinishFittingScript, FiDistFinishPipeScript)
# Finish siphon plumbing
FiSiphonPipeLast :=
    local ← view("t")
    for i ∈ 1 .. N_Fi
        Pipe ← PipeSUBF(FiSiphonElbow3_Origin + [ElbowRadius(ND_FiSiphon); (W_Fi + T_FiWall)*(i - 1); ElbowRadius(ND_FiSiphon)], Z_FiSiphonOutlet - FiSiphonElbow3_Origin[2] - ElbowRadius(ND_FiSiphon), [0; 90]*deg, ND_FiSiphon, PS_Default, ["DrainChannelCon"])
        local ← stack(local, Pipe)
    return local
FiSiphonFinishScript := stack(SelectFiSiphonPipe, FiSiphonPipeLast, FiSiphonPipeFrz)
# Finish box drain plumbing
# Overflow box drain horizontal pipes
FiOverflowHorizPipe :=
    local ← view("t")
    for i ∈ 1 .. ceil(N_Fi/2)
        Pipe ← PipeSUBF(FiOverflowElbow_Origin + [0 m; (i - 1)*(W_Fi + T_FiWall)*(1 + (N_Fi > 3)); 0 m], L_FiOverflow/2 + 2*T_PlantWall + W_FiInletChannel - ElbowRadius(ND_FiEntOverflow), [180; 0]*deg, ND_FiEntOverflow, PS_Default, ["DrainChannelCon"])
        local ← stack(local, Pipe)
    return local
# Exit box drain horizontal pipes
FiExitHorizDrainPipe :=
    local ← view("t")
    for i ∈ 1 .. N_Fi
        Pipe ← PipeSUBF(FiOutElbow2_origin + [0 m; (i - 1)*(W_Fi + T_FiWall); 0 m], ConRadius(ND_FiTrunk) + S_Fitting + L_FiEntrance + T_FiWeir + 2*T_PlantWall + W_FiInletChannel - ElbowRadius(ND_FiExitWaste), [180; 0]*deg, ND_FiExitWaste, PS_Default, ["DrainChannelCon"])
        local ← stack(local, Pipe)
    return local
FiBoxDrainFinishScript := stack(SelectFiAuxPipe, FiOverflowHorizPipe, FiAuxPipeFrz, SelectFiEntExitPipe, FiExitHorizDrainPipe, FiEntExitPipeFrz)
# Chlorine dosing pipe
ChlorineDrainChannelPipe_Origin := [
    FiInletChannel_Origin[0] + T_PlantWall + outerradius(ND_ChlorPipe);
    Et_Origin[1] - W_EtWalkway;
    Z_FiExitStub + 2*S_Fitting
]
ChlorineDrainChannelElbow_Origin := [
    FiInletChannel_Origin[0] + T_PlantWall + outerradius(ND_ChlorPipe);
    FiInletChannel_Origin[1] + L_FiInletChannel + T_PlantWall + outerradius(ND_ChlorPipe) + ElbowRadius(ND_ChlorPipe);
    Z_FiExitStub + 2*S_Fitting
]
ChlorineExitBoxElbow_Origin := [
    FiExitBox_origin[0] - outerradius(ND_ChlorPipe);
    FiInletChannel_Origin[1] + L_FiInletChannel + T_PlantWall + outerradius(ND_ChlorPipe) - ElbowRadius(ND_ChlorPipe);
    Z_FiExitStub + 2*S_Fitting
]
ChlorineExitBoxTee_Origin := [
    FiExitBox_origin[0] - outerradius(ND_ChlorPipe) - sqrt(2)/2*ShortTeeLength(ND_ChlorPipe);
    FiExitBox_origin[1] + L_FiInletChannel - S_Fitting - ConRadius(ND_FiBwTrunk) - (mod(N_Fi, 2) == 1 and N_Fi ≠ 3)*(W_FiOverflow + T_PlantWall);
    Z_FiExitStub + 2*S_Fitting - sqrt(2)/2*ShortTeeLength(ND_ChlorPipe)
]
ChlorineDistBoxTee_Origin := [
    FiExitBox_origin[0] - outerradius(ND_ChlorPipe) - sqrt(2)/2*ShortTeeLength(ND_ChlorPipe);
    FiExitBox_origin[1] + L_FiInletChannel - W_FiOverflow/2 - (mod(N_Fi, 2) == 0 or N_Fi == 3)*(W_FiEntrance + T_PlantWall);
    Z_FiExitStub + 2*S_Fitting - sqrt(2)/2*ShortTeeLength(ND_ChlorPipe)
]
ChlorineExitBoxAirElbow_Origin := ChlorineExitBoxTee_Origin + [
    sqrt(2)/2*ShortTeeLength(ND_ChlorPipe);
    -(N_Fi - 1)*(W_Fi + T_FiWall) - TeeLength(ND_ChlorPipe)/2 - 2*SocketDepth(ND_ChlorPipe);
    sqrt(2)/2*ShortTeeLength(ND_ChlorPipe)
]
ChlorineExitBoxAirCap_Origin := [
    ChlorineExitBoxAirElbow_Origin[0];
    ChlorineExitBoxAirElbow_Origin[1] - ElbowRadius(ND_ChlorPipe);
    Z_FiTop - CapThickness(ND_ChlorPipe)
]
# Chlorine dosing pipe fittings
ChlorineDrainChannelElbow := ElbowSUBF(ChlorineDrainChannelElbow_Origin, [180; 180; 0]*deg, ND_ChlorPipe, PS_Modules, ["DrainChannelCon"])
ChlorineExitBoxElbow := ElbowSUBF(ChlorineExitBoxElbow_Origin, [0; 180; 0]*deg, ND_ChlorPipe, PS_Modules, ["FiCon"])
ChlorineExitBoxTee := TeeF(ChlorineExitBoxTee_Origin, [90; -45; 0]*deg, ND_ChlorPipe, PS_Modules)
ArrayChlorineExitBoxTee := ArrayLast(N_Fi, 1, -W_Fi - T_FiWall)
ChlorineDistBoxTee := TeeF(ChlorineDistBoxTee_Origin, [90; -45; 0]*deg, ND_ChlorPipe, PS_Modules)
ArrayChlorineDistBoxTee := ArrayLast(N_DistOverflow, 1, (-W_Fi - T_FiWall)*(1 + (N_Fi > 3)))
ChlorineExitBoxAirElbow := ElbowF(ChlorineExitBoxAirElbow_Origin, [180; -90; 0]*deg, ND_ChlorPipe, PS_Modules)
ChlorineExitBoxAirCap := CapF(ChlorineExitBoxAirCap_Origin, [0; -90; 0]*deg, ND_ChlorPipe)
ChlorineExitBoxAirCapHole := CylinderF(ChlorineExitBoxAirCap_Origin + [0 m; 0 m; -zc], 1/8*in, 2*zc + CapThickness(ND_ChlorPipe), [0; 90]*deg)
ChlorineDoseFittingScript := stack(FiChlorineDoseFittingLayer, ChlorineDrainChannelElbow, ChlorineExitBoxElbow, ChlorineExitBoxTee, ArrayChlorineExitBoxTee, ChlorineDistBoxTee, ArrayChlorineDistBoxTee, ChlorineExitBoxAirElbow, ChlorineExitBoxAirCap, FiChlorineDoseFittingFrz, ChlorineExitBoxAirCapHole, GroupDelete, SubtractFromFiChlorineDoseFitting)
# Chlorine dosing pipes
ChlorineDrainChannelPipe := PipeF(ChlorineDrainChannelPipe_Origin, ChlorineDrainChannelPipe_Origin[1] - ChlorineDrainChannelElbow_Origin[1], [90; 0]*deg, ND_ChlorPipe, PS_Modules)
ChlorineOutsideBoxPipe := PipeSUBF(ChlorineDrainChannelElbow_Origin + [-ElbowRadius(ND_ChlorPipe); -ElbowRadius(ND_ChlorPipe); 0 m], ChlorineDrainChannelElbow_Origin[0] - ChlorineExitBoxElbow_Origin[0] - 2*ElbowRadius(ND_ChlorPipe), [0; 0]*deg, ND_ChlorPipe, PS_Modules, ["DrainChannelCon"])
L_ChlorineBoxFirstPipe :=
    ChlorineExitBoxElbow_Origin[1] - ChlorineExitBoxTee_Origin[1] - TeeLength(ND_ChlorPipe)/2 if mod(N_Fi, 2) == 0 or N_Fi == 3
    ChlorineExitBoxElbow_Origin[1] - ChlorineDistBoxTee_Origin[1] - TeeLength(ND_ChlorPipe)/2 otherwise
ChlorineBoxFirstPipe := PipeSUBF(ChlorineExitBoxElbow_Origin, L_ChlorineBoxFirstPipe, [90; 0]*deg, ND_ChlorPipe, PS_Modules, ["FiCon"])
ChlorineExitToDistPipe := PipeF(ChlorineExitBoxTee_Origin + [
    sqrt(2)/2*ShortTeeLength(ND_ChlorPipe);
    -TeeLength(ND_ChlorPipe)/2 - (N_Fi > 4 and mod(N_Fi, 2) == 1)*(W_Fi + T_FiWall);
    sqrt(2)/2*ShortTeeLength(ND_ChlorPipe)
], W_FiEntrance + T_PlantWall + W_FiOverflow/2 - TeeLength(ND_ChlorPipe) - S_Fitting - ConRadius(ND_FiBwTrunk), [90; 0]*deg, ND_ChlorPipe, PS_Modules)
ArrayChlorineExitToDistPipe := ArrayLast(N_DistOverflow, 1, -(W_Fi + T_FiWall)*(1 + (N_Fi > 3)))
ChlorExitToDistPipeScript :=
    stack(ChlorineExitToDistPipe, ArrayChlorineExitToDistPipe) if N_Fi > 1
    view("t") otherwise
ChlorineDistToExitPipe := PipeF(ChlorineDistBoxTee_Origin + [
    sqrt(2)/2*ShortTeeLength(ND_ChlorPipe);
    -TeeLength(ND_ChlorPipe)/2;
    sqrt(2)/2*ShortTeeLength(ND_ChlorPipe)
], W_FiOverflow/2 + T_PlantWall + S_Fitting + ConRadius(ND_FiBwTrunk) - TeeLength(ND_ChlorPipe), [90; 0]*deg, ND_ChlorPipe, PS_Modules)
ArrayChlorineDistToExitPipe := ArrayLast(N_DistOverflow, 1, -(W_Fi + T_FiWall)*(1 + (N_Fi > 3)))
ChlorineDistToExitPipe := stack(ChlorineDistToExitPipe, ArrayChlorineDistToExitPipe)
ChlorineExitToExitPipe := PipeSUBF(ChlorineExitBoxTee_Origin + [
    sqrt(2)/2*ShortTeeLength(ND_ChlorPipe);
    -TeeLength(ND_ChlorPipe)/2 - (mod(N_Fi, 2) == 0)*(W_Fi + T_FiWall);
    sqrt(2)/2*ShortTeeLength(ND_ChlorPipe)
], W_FiEntrance + T_PlantWall + W_FiOverflow + T_PlantWall, [90; 0]*deg, ND_ChlorPipe, PS_Modules, ["FiCon"])
ArrayChlorineExitToExitPipe := ArrayLast(N_FiPeninsulas, 1, -2*(W_Fi + T_FiWall))
ChlorineExitToExitPipe :=
    stack(ChlorineExitToExitPipe, ArrayChlorineExitToExitPipe) if N_FiPeninsulas > 1
    view("t") otherwise
ChlorineAirReleaseNipple := PipeF(ChlorineExitBoxAirElbow_Origin, 2*SocketDepth(ND_ChlorPipe), [-90; 0]*deg, ND_ChlorPipe, PS_Modules)
ChlorineAirReleaseVertPipe := PipeF(ChlorineExitBoxAirCap_Origin, ChlorineExitBoxAirCap_Origin[2] - ChlorineExitBoxAirElbow_Origin[2] - ElbowRadius(ND_ChlorPipe), [0; -90]*deg, ND_ChlorPipe, PS_Modules)
ChlorineDosePipeScript := stack(FiChlorineDosePipeLayer, ChlorineDrainChannelPipe, ChlorineOutsideBoxPipe, ChlorineBoxFirstPipe, ChlorExitToDistPipeScript, ChlorineDistToExitPipe, ChlorineExitToExitPipe, ChlorineAirReleaseNipple, ChlorineAirReleaseVertPipe, FiChlorineDosePipeFrz)
ChlorineDosePlumbingScript := stack(ChlorineDoseFittingScript, ChlorineDosePipeScript)
# Add boxes to show heights of water and sand
FiWaterLayer := layer_new("FiWater", blue2)
Water_FiInletChannel := BoxF(FiInletChannel_Origin, FiInletChannel_Origin + [-W_FiInletChannel; L_FiInletChannel; ZW_FiInletChannel - FiInletChannel_Origin[2]], [0; 0; 0]*deg)
Water_FiEntranceBoxTerminal := BoxF(FiEntranceBox_origin, FiEntranceBox_origin + [-L_FiEntrance; W_FiEntrance; ZW_FiEntranceTerminal - FiEntranceBox_origin[2]], [0; 0; 0]*deg)
Water_FiBoxTerminal := BoxF(Fi_origin, Fi_origin + [-L_Fi; W_Fi; ZW_FiMax - Z_FiBottom], [0; 0; 0]*deg)
Water_FiEntranceBoxClean := BoxF(FiEntranceBox_origin, FiEntranceBox_origin + [-L_FiEntrance; W_FiEntrance; ZW_FiEntranceCleanForward - FiEntranceBox_origin[2]], [0; 0; 0]*deg)
Water_FiBoxClean := BoxF(Fi_origin, Fi_origin + [-L_Fi; W_Fi; ZW_FiClean - Z_FiBottom], [0; 0; 0]*deg)
Water_FiEntranceBoxBw := BoxF(FiEntranceBox_origin, FiEntranceBox_origin + [-L_FiEntrance; W_FiEntrance; ZW_FiEntranceBwSS - FiEntranceBox_origin[2]], [0; 0; 0]*deg)
Water_FiBoxBw := BoxF(Fi_origin, Fi_origin + [-L_Fi; W_Fi; ZW_FiBwSS - Z_FiBottom], [0; 0; 0]*deg)
FreezeFiWater := FreezeLayer("FiWater")
FiWaterTerminalScript := stack(FiWaterLayer, Water_FiInletChannel, Water_FiEntranceBoxTerminal, Water_FiBoxTerminal, FreezeFiWater)
FiWaterCleanScript := stack(FiWaterLayer, Water_FiInletChannel, Water_FiEntranceBoxClean, Water_FiBoxClean, FreezeFiWater)
FiWaterBwScript := stack(FiWaterLayer, Water_FiInletChannel, Water_FiEntranceBoxBw, Water_FiBoxBw, FreezeFiWater)
FiSandLayer := layer_new("FiSand", yellow)
Sand_FiBoxForward := BoxF(Fi_origin, Fi_origin + [-L_Fi; W_Fi; H_FiSand], [0; 0; 0]*deg)
Sand_FiBoxBw := BoxF(Fi_origin, Fi_origin + [-L_Fi; W_Fi; H_FiFluidizedBed], [0; 0; 0]*deg)
FreezeFiSand := FreezeLayer("FiSand")
FiSandForwardScript := stack(FiSandLayer, Sand_FiBoxForward, FreezeFiSand)
FiSandBwScript := stack(FiSandLayer, Sand_FiBoxBw, FreezeFiSand)
AC_Filter := stack(PlantDrainChannelScript, FiInletChannelScript, FiTankScript, FiManifoldScript, FiManWingSpacerScript, FiAuxScript, FiSandDrainScript, FiSiphonScript, FiRemovableWeirScript, FiArrayScript, FiBoxCutoutScript, FiDistBarrierScript, FiDistFinishScript, FiSiphonFinishScript, FiBoxDrainFinishScript, ChlorineDosePlumbingScript)
