Q_Plant := 15*L/s
# [reference: ExpertInputs.xmcd]
# [reference: MathFunctions.xmcd]
# [reference: PipeDatabase.xmcd]
# [reference: MaterialsDatabase.xmcd]
# [reference: FluidsFunctions.xmcd]
# [reference: SedTankFunctions.xmcd]
# [reference: CdcFunctions.xmcd]
# [reference: LfomFunctions.xmcd]
# [reference: SedimentationTank.xmcd]
# [reference: Flocculator.xmcd]
# [reference: LFOM.xmcd]
# [reference: EntranceTank.xmcd]
# [reference: StackedRapidSandFilter.xmcd]
# [reference: LinearCdc.xmcd]
# [reference: ChemStorageTanks.xmcd]
# AutoCAD drawing programs:
# Translators:
# These are the codes that take MathCAD outputs and create AutoCAD scripts that are used to draw the plant (formerly Basics)
# [reference: MtoATranslators.xmcd]
# The wrapped MtoA translator contains the functions that the user will want to access. These functions will draw pieces with full functionality - specifying the location, dimension, and orientation of the object. Also, it contains layer control and subtraction capabilities for grouped objects.
# [reference: MtoATranslatorsWrapped.xmcd]
# Drawing functions:
# [reference: ChannelF.xmcd]
# [reference: PlumbingF.xmcd]
# [reference: TankF.xmcd]
# [reference: StairsF.xmcd]
# [reference: DrainChannelF.xmcd]
# AutoCAD Script Files:
# [reference: FlocculatorAC.xmcd]
# [reference: SedimentationTankAC.xmcd]
# [reference: EntranceTankAC.xmcd]
# [reference: ChemStockTanksAC.xmcd]
# this is a silly thing that needs to be deleted or moved at one point
# Right now it is used for valve drawing, to see where the valves end up.
tiny := .001 m
# Stacked Rapid Sand Filter
# Concrete Box and Plant Drain Channel Origin Points
# The filters and everything associated with them need to be bumped down in the y direction to avoid running into the walkway if there is more than 1 filter.
# Y spacing is the spacing between SedOutletCoupling1.Origin(N)1
# Two filters additional space:
FiSlide :=
    |SedOutletCoupling1_Origin(1)[1] - SedOutletCoupling1_Origin(2)[1]| if N_Fi ≥ 2
    0 otherwise
# The Y position is set so that the northern wall of the filter inlet channel aligns with the northern wall of the sed tanks (we want the inlet pipes to fit along the length of the inlet channel)
Fi_origin :=
    if EN_DoubleTrain == 0
        [
            Plant_Origin[0] - W_FiInletChannel - 5*T_PlantWall - T_FiWall - L_FiEntrance - L_FiExit - W_MpWalkway - L_Sed - W_PlantDC;
            Plant_Origin[1] + N_SedTanks*(W_Sed + T_PlantWall) - T_PlantWall - W_Fi/2 - ConRadius(ND_FiBwTrunk) - S_Fitting - FiSlide;
            Z_FiBottom
        ]
    otherwise
        [
            Plant_Origin[0] - (L_Sed - W_SedInletChannel - T_SedWeir) + W_Fi/2 + ConRadius(ND_FiBwTrunk) + S_Fitting;
            Plant_Origin[1] - 5*T_PlantWall - W_PlantDC - 2*W_FiInletChannel - T_FiWall - L_FiEntrance - L_FiExit - W_MpWalkway - L_Fi;
            Z_FiBottom
        ]
FiEntranceBox_origin :=
    if EN_DoubleTrain == 0
        [
            Plant_Origin[0] - W_FiInletChannel - 2*T_PlantWall - L_Sed - W_PlantDC - T_ChannelWall;
            Fi_origin[1] + W_Fi/2 - W_FiEntrance + S_Fitting + ConRadius(ND_FiBwTrunk);
            Z_FiEntranceBottom
        ]
    otherwise
        [
            Fi_origin[0] - W_Fi/2 + W_FiEntrance - S_Fitting - ConRadius(ND_FiBwTrunk);
            Plant_Origin[1] - 3*T_PlantWall - 2*W_FiInletChannel - W_PlantDC - L_FiEntrance - T_ChannelWall;
            Z_FiEntranceBottom
        ]
FiExitBox_origin := FiEntranceBox_origin + {
    [-L_FiEntrance - T_ChannelWall; 0; 0] if EN_DoubleTrain == 0
    [0; -T_ChannelWall - L_FiExit; 0] otherwise
}
FiInletChannel_Origin :=
    if EN_DoubleTrain == 0
        [
            Plant_Origin[0] - L_Sed - 2*T_PlantWall - W_PlantDC;
            FiEntranceBox_origin[1] - L_FiInletChannel + W_FiEntrance;
            Z_FiInletChannelBottom
        ]
    otherwise
        [
            Plant_Origin[0] + (L_FiInletChannel - (L_Sed - W_SedInletChannel - T_SedWeir));
            Plant_Origin[1] - W_PlantDC - 2*W_FiInletChannel - 3*T_PlantWall;
            Z_FiInletChannelBottom
        ]
FiOverflowBox_Origin :=
    if EN_DoubleTrain == 0
        [
            FiEntranceBox_origin[0];
            FiEntranceBox_origin[1] - T_ChannelWall - W_FiOverflow;
            Z_FiOverflowBottom
        ]
    otherwise
        [
            FiEntranceBox_origin[0] + T_ChannelWall + W_FiOverflow;
            FiEntranceBox_origin[1];
            Z_FiOverflowBottom
        ]
FiDistBox_Origin :=
    if EN_DoubleTrain == 0
        [
            FiOverflowBox_Origin[0] - L_FiOverflow - T_ChannelWall;
            FiOverflowBox_Origin[1];
            FiExitBox_origin[2]
        ]
    [FiOverflowBox_Origin[0]; FiOverflowBox_Origin[1] - L_FiExit - T_ChannelWall; FiExitBox_origin[2]] otherwise
PlantDC_Origin := [
    Plant_Origin[0] - L_Sed - T_PlantWall - W_PlantDC;
    Plant_Origin[1] - T_PlantWall;
    Z_PlantUpperDCBottom + H_PlantDC
]
PlantLowerDC_Origin :=
    if EN_DoubleTrain == 0
        [
            Plant_Origin[0] - L_Sed - T_PlantWall - W_PlantDC;
            Plant_Origin[1] - T_PlantWall;
            Z_PlantLowerDCBottom + H_PlantDC
        ]
    otherwise
        [
            Plant_Origin[0] - L_Sed - T_PlantWall - W_PlantDC;
            Plant_Origin[1] - 2*T_PlantWall - W_FiInletChannel - W_PlantDC - T_ChannelWall;
            Z_PlantLowerDCBottom + H_PlantDC
        ]
PlantUpperDC_Origin :=
    if EN_DoubleTrain == 0
        [
            Plant_Origin[0] - L_Sed - T_PlantWall - W_PlantDC;
            Fi_origin[1] + W_Fi;
            Z_PlantUpperDCBottom + H_PlantDC
        ]
    otherwise
        [
            Plant_Origin[0] - L_Sed - T_PlantWall - W_PlantDC;
            Plant_Origin[1] - T_PlantWall;
            Z_PlantUpperDCBottom + H_PlantDC
        ]
PlantSideDC_Origin := [
    Plant_Origin[0] - L_Sed - T_PlantWall;
    Plant_Origin[1] - 2*T_PlantWall - W_FiInletChannel;
    Z_PlantLowerDCBottom + H_PlantDC
]
# Coupling Origin Points
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# This will be the pipe layout in the entrance and exit boxes to allow for 2 90 degree elbows in  Pipes 2 and 3 coming from the entrance box (on the right)
FiInletCoupling1_origin :=
    if EN_DoubleTrain == 0
        [
            FiEntranceBox_origin[0] - L_FiEntrance + T_ConcreteMin + ConRadius(ND_FiTrunk);
            FiEntranceBox_origin[1] + W_FiEntrance - ConRadius(ND_FiBwTrunk) - S_Fitting;
            FiEntranceBox_origin[2] - CouplingLength(ND_FiTrunk) + SocketDepth(ND_FiTrunk)
        ]
    otherwise
        [
            FiEntranceBox_origin[0] - W_FiEntrance + ConRadius(ND_FiBwTrunk) + S_Fitting;
            FiEntranceBox_origin[1] + T_ConcreteMin + ConRadius(ND_FiTrunk);
            FiEntranceBox_origin[2] - CouplingLength(ND_FiTrunk) + SocketDepth(ND_FiTrunk)
        ]
FiBwInletCoupling_origin :=
    if EN_DoubleTrain == 0
        [
            FiInletCoupling1_origin[0] + L_FiOverflowWeir - S_Fitting - 2*ConRadius(ND_FiBwTrunk);
            FiInletCoupling1_origin[1];
            FiEntranceBox_origin[2] - CouplingLength(ND_FiBwTrunk) + SocketDepth(ND_FiBwTrunk)
        ]
    otherwise
        [
            FiInletCoupling1_origin[0];
            FiInletCoupling1_origin[1] + L_FiOverflowWeir - S_Fitting - 2*ConRadius(ND_FiBwTrunk);
            FiEntranceBox_origin[2] - CouplingLength(ND_FiBwTrunk) + SocketDepth(ND_FiBwTrunk)
        ]
FiInletCoupling2_origin :=
    if EN_DoubleTrain == 0
        [
            FiEntranceBox_origin[0] - L_FiEntrance + L_FiOverflowWeir - (ConRadius(ND_FiTrunk) + S_Fitting);
            FiEntranceBox_origin[1] + 2*T_ConcreteMin + 3*ConRadius(ND_FiTrunk);
            FiInletCoupling1_origin[2]
        ]
    otherwise
        [
            FiEntranceBox_origin[0] - 2*T_ConcreteMin - 3*ConRadius(ND_FiTrunk);
            FiEntranceBox_origin[1] + L_FiOverflowWeir - (ConRadius(ND_FiTrunk) + S_Fitting);
            FiInletCoupling1_origin[2]
        ]
FiInletCoupling3_origin :=
    if EN_DoubleTrain == 0
        [
            FiEntranceBox_origin[0] - L_FiEntrance + T_ConcreteMin + ConRadius(ND_FiTrunk);
            FiEntranceBox_origin[1] + 2*T_ConcreteMin + 3*ConRadius(ND_FiTrunk);
            FiEntranceBox_origin[2] - CouplingLength(ND_FiTrunk) + SocketDepth(ND_FiTrunk)
        ]
    otherwise
        [
            FiEntranceBox_origin[0] - 2*T_ConcreteMin - 3*ConRadius(ND_FiTrunk);
            FiEntranceBox_origin[1] + T_ConcreteMin + ConRadius(ND_FiTrunk);
            FiEntranceBox_origin[2] - CouplingLength(ND_FiTrunk) + SocketDepth(ND_FiTrunk)
        ]
FiExitCoupling0_origin :=
    if EN_DoubleTrain == 0
        [
            FiExitBox_origin[0] - T_ConcreteMin - ConRadius(ND_FiTrunk);
            FiInletCoupling1_origin[1];
            FiExitBox_origin[2] - CouplingLength(ND_FiTrunk) + SocketDepth(ND_FiTrunk)
        ]
    otherwise
        [
            FiInletCoupling1_origin[0];
            FiExitBox_origin[1] + L_FiExit - T_ConcreteMin - ConRadius(ND_FiTrunk);
            FiExitBox_origin[2] - CouplingLength(ND_FiTrunk) + SocketDepth(ND_FiTrunk)
        ]
FiExitCoupling1_origin :=
    if EN_DoubleTrain == 0
        [
            (FiExitBox_origin[0] - L_FiExit + T_ConcreteMin) + ConRadius(ND_FiTrunk);
            FiInletCoupling1_origin[1];
            FiExitBox_origin[2] - CouplingLength(ND_FiTrunk) + SocketDepth(ND_FiTrunk)
        ]
    otherwise
        [
            FiInletCoupling1_origin[0];
            FiExitBox_origin[1] + T_ConcreteMin + ConRadius(ND_FiTrunk);
            FiExitBox_origin[2] - CouplingLength(ND_FiTrunk) + SocketDepth(ND_FiTrunk)
        ]
FiExitCoupling2_origin :=
    if EN_DoubleTrain == 0
        [
            (FiExitBox_origin[0] - L_FiExit + T_ConcreteMin) + ConRadius(ND_FiExitWaste);
            FiExitBox_origin[1] + T_ConcreteMin + ConRadius(ND_FiTrunk);
            FiExitBox_origin[2] - CouplingLength(ND_FiTrunk) + SocketDepth(ND_FiTrunk)
        ]
    otherwise
        [
            FiExitBox_origin[0] - T_ConcreteMin - ConRadius(ND_FiTrunk);
            FiExitBox_origin[1] + T_ConcreteMin + ConRadius(ND_FiExitWaste);
            FiExitBox_origin[2] - CouplingLength(ND_FiTrunk) + SocketDepth(ND_FiTrunk)
        ]
FiExitCoupling3_origin :=
    if EN_DoubleTrain == 0
        [
            FiExitBox_origin[0] - T_ConcreteMin - ConRadius(ND_FiTrunk);
            FiExitBox_origin[1] + T_ConcreteMin + ConRadius(ND_FiTrunk);
            FiExitBox_origin[2] - CouplingLength(ND_FiExitWaste) + SocketDepth(ND_FiExitWaste)
        ]
    otherwise
        [
            FiExitBox_origin[0] - T_ConcreteMin - ConRadius(ND_FiTrunk);
            FiExitBox_origin[1] + L_FiExit - T_ConcreteMin - ConRadius(ND_FiTrunk);
            FiExitBox_origin[2] - CouplingLength(ND_FiExitWaste) + SocketDepth(ND_FiExitWaste)
        ]
FiFerncoBwCoupling_origin :=
    [Fi_origin[0]; FiBwInletCoupling_origin[1]; Fi_origin[2] + outerradius(ND_FiBwManBranch)] if EN_DoubleTrain == 0
    [FiBwInletCoupling_origin[0]; Fi_origin[1] + L_Fi; Fi_origin[2] + outerradius(ND_FiBwManBranch)] otherwise
FiFerncoCouplings_origin :=
    [Fi_origin[0]; FiFerncoBwCoupling_origin[1]; FiFerncoBwCoupling_origin[2] + H_FiBottomLayer] if EN_DoubleTrain == 0
    [FiFerncoBwCoupling_origin[0]; Fi_origin[1] + L_Fi; FiFerncoBwCoupling_origin[2] + H_FiBottomLayer] otherwise
FiWallBwCoupling_origin :=
    if EN_DoubleTrain == 0
        [
            Fi_origin[0] + T_FiWall + CouplingLength(ND_FiBwTrunk) - SocketDepth(ND_FiBwTrunk);
            FiBwInletCoupling_origin[1];
            Fi_origin[2] + outerradius(ND_FiBwManBranch)
        ]
    otherwise
        [
            FiBwInletCoupling_origin[0];
            Fi_origin[1] + T_FiWall + SocketDepth(ND_FiBwTrunk) + L_Fi;
            Fi_origin[2] + outerradius(ND_FiBwManBranch)
        ]
FiWallCouplings_origin :=
    if EN_DoubleTrain == 0
        [
            Fi_origin[0] + T_FiWall + CouplingLength(ND_FiTrunk) - SocketDepth(ND_FiTrunk);
            FiBwInletCoupling_origin[1];
            Fi_origin[2] + outerradius(ND_FiBwManBranch) + H_FiBottomLayer
        ]
    otherwise
        [
            FiBwInletCoupling_origin[0];
            Fi_origin[1] + T_FiWall + SocketDepth(ND_FiTrunk) + L_Fi;
            Fi_origin[2] + outerradius(ND_FiBwManBranch) + H_FiBottomLayer
        ]
# Concrete Box Dimensions
FiEntranceBox_dim :=
    [L_FiEntrance; W_FiEntrance; H_FiEntrance] if EN_DoubleTrain == 0
    [W_FiEntrance; L_FiEntrance; H_FiEntrance] otherwise
FiExitBox_dim :=
    [L_FiExit; W_FiEntrance; H_FiEntrance] if EN_DoubleTrain == 0
    [W_FiEntrance; L_FiExit; H_FiEntrance] otherwise
Fi_dim :=
    [L_Fi; W_Fi; H_Fi] if EN_DoubleTrain == 0
    [W_Fi; L_Fi; H_Fi] otherwise
    = [1.28239; 1.28243; 4.54867] m
FiOverflowBox_Dim :=
    [L_FiOverflow; W_FiOverflow; H_FiOverflow] if EN_DoubleTrain == 0
    [W_FiOverflow; L_FiOverflow; H_FiOverflow] otherwise
FiDistBox_Dim :=
    [L_FiExit; W_FiOverflow; H_FiEntrance] if EN_DoubleTrain == 0
    [W_FiOverflow; L_FiExit; H_FiEntrance] otherwise
# Origins and Dimensions
FiInletCoupling_Origin(N) :=
    if EN_DoubleTrain == 0
        [
            FiInletChannel_Origin[0] + CouplingLength(ND_FiEntrancePipe) - SocketDepth(ND_FiEntrancePipe);
            SedOutletCoupling2_Origin(N)[1] - FiSlide;
            SedOutletCoupling2_Origin(N)[2]
        ]
    (SedOutletCoupling2_Origin(N) - [0 m; W_PlantDC + T_PlantWall; 0 m]) otherwise
L_FiInletPipe :=
    SedOutletCoupling2_Origin(1)[0] - CouplingLength(ND_FiEntrancePipe) + 2*SocketDepth(ND_FiEntrancePipe) - FiInletCoupling_Origin(1)[0] if EN_DoubleTrain == 0
    (W_PlantDC + SocketDepth(ND_FiEntrancePipe) + T_PlantWall - (CouplingLength(ND_FiEntrancePipe) - SocketDepth(ND_FiEntrancePipe))) otherwise
# Inlet Channel Concrete
LayerFiInletChannel := layer_new("FiInletChannelCon", grey)
FiInletChannel := Tank(FiInletChannel_Origin, {
    [W_FiInletChannel; L_FiInletChannel; H_FiInletChannel] if EN_DoubleTrain == 0
    [L_FiInletChannel; W_FiInletChannel; H_FiInletChannel] otherwise
}, T_PlantWall)
FreezeFiInletChannel := FreezeLayer("FiInletChannelCon")
FiInletChannelConScript := stack(LayerFiInletChannel, FiInletChannel, FreezeFiInletChannel)
# Inlet Channel Coupling(s)
FiInletFittingLayer := layer_new("FiInletFittingsPlu", green)
FiInletFittingFrz := FreezeLayer("FiInletFittingsPlu")
FiInletCouplingScript :=
    Local ← FiInletFittingLayer
    for i ∈ 1 .. N_FiEntrancePipes
        Local ← stack(Local, CouplingSUBF(FiInletCoupling_Origin(i), [0; 0]*deg, ND_FiEntrancePipe, PS_Default, ["FiInletChannelCon"]))
    return stack(Local, FiInletFittingFrz)
# Inlet Pipes from Sedimentation
FiInletPipeLayer := layer_new("FiInletPipePlu", blue)
FiInletPipeFrz := FreezeLayer("FiInletPipePlu")
FiInletPipe :=
    Local ← FiInletPipeLayer
    for i ∈ 1 .. N_FiEntrancePipes
        Local ← stack(Local, PipeSUBF([
            SedOutletCoupling2_Origin(i)[0] - CouplingLength(ND_FiEntrancePipe) + 2*SocketDepth(ND_FiEntrancePipe);
            SedOutletCoupling2_Origin(i)[1] - FiSlide;
            SedOutletCoupling2_Origin(i)[2]
        ], L_FiInletPipe, [0; 0]*deg, ND_FiEntrancePipe, PS_Default, ["FiInletChannelCon"]))
    return Local
FiInletPipeHigh :=
    Local ← FiInletPipeLayer
    for i ∈ 1 .. N_FiEntrancePipes
        Local ← stack(Local, PipeSUBF(FiInletCoupling_Origin(i), L_FiInletPipe, [-90; 0]*deg, ND_FiEntrancePipe, PS_Default, ["FiInletChannelCon"]))
    return stack(Local, FiInletPipeFrz)
FiInletPipe :=
    FiInletPipe if EN_DoubleTrain == 0
    FiInletPipeHigh otherwise
FiInletPipeScript := stack(FiInletPipeLayer, FiInletPipe, FiInletPipeFrz)
FiInletChannelScript := stack(FiInletChannelConScript, FiInletCouplingScript, FiInletPipeScript)
FiInletChannelScriptMod := stack(FiInletChannelConScript)
# Inlet Channel
# Filter Box Concrete
LayerFiTank := layer_new("FiTankCon", grey)
FiTank := Tank(Fi_origin, Fi_dim, T_FiWall)
FiSiphonManLedgeL :=
    if EN_DoubleTrain == 0
        BoxF([
            Fi_origin[0];
            Fi_origin[1] + T_ConcreteMin + ConRadius(ND_FiSiphon) - 2*S_Fitting;
            Z_FiSiphonInlet - ConRadius(ND_FiSiphon) - outerradius(ND_FiSiphon)
        ], [
            Fi_origin[0] - T_ConcreteMin;
            Fi_origin[1] + T_ConcreteMin + ConRadius(ND_FiSiphon) + 2*S_Fitting;
            Z_FiSiphonInlet - ConRadius(ND_FiSiphon) - outerradius(ND_FiSiphon) - T_ConcreteMin
        ], [0; 0; 0]*deg)
    otherwise
        BoxF([
            Fi_origin[0] - T_ConcreteMin - ConRadius(ND_FiSiphon) + 2*S_Fitting;
            Fi_origin[1];
            Z_FiSiphonInlet - ConRadius(ND_FiSiphon) - outerradius(ND_FiSiphon)
        ], [
            Fi_origin[0] - T_ConcreteMin - ConRadius(ND_FiSiphon) - 2*S_Fitting;
            Fi_origin[1] + T_ConcreteMin;
            Z_FiSiphonInlet - ConRadius(ND_FiSiphon) - outerradius(ND_FiSiphon) - T_ConcreteMin
        ], [0; 0; 0]*deg)
FiSiphonManLedgeR :=
    if EN_DoubleTrain == 0
        BoxF([
            Fi_origin[0] - L_Fi;
            Fi_origin[1] + T_ConcreteMin + ConRadius(ND_FiSiphon) - 2*S_Fitting;
            Z_FiSiphonInlet - ConRadius(ND_FiSiphon) - outerradius(ND_FiSiphon)
        ], [
            Fi_origin[0] - L_Fi + T_ConcreteMin;
            Fi_origin[1] + T_ConcreteMin + ConRadius(ND_FiSiphon) + 2*S_Fitting;
            Z_FiSiphonInlet - ConRadius(ND_FiSiphon) - outerradius(ND_FiSiphon) - T_ConcreteMin
        ], [0; 0; 0]*deg)
    otherwise
        BoxF([
            Fi_origin[0] - T_ConcreteMin - ConRadius(ND_FiSiphon) + 2*S_Fitting;
            Fi_origin[1] + L_Fi;
            Z_FiSiphonInlet - ConRadius(ND_FiSiphon) - outerradius(ND_FiSiphon)
        ], [
            Fi_origin[0] - T_ConcreteMin - ConRadius(ND_FiSiphon) - 2*S_Fitting;
            Fi_origin[1] + L_Fi - T_ConcreteMin;
            Z_FiSiphonInlet - ConRadius(ND_FiSiphon) - outerradius(ND_FiSiphon) - T_ConcreteMin
        ], [0; 0; 0]*deg)
LayerFiTankFreeze := FreezeLayer("FiTankCon")
FiTankScript := stack(LayerFiTank, FiTank, FiSiphonManLedgeL, FiSiphonManLedgeR, Union_All, LayerFiTankFreeze)
# Plant Drain Channel
MainDCLayer := layer_new("DrainChannelCon", grey)
SideDCLayer := layer_new("DrainChannelSideCon", grey)
L_PlantLowerDC :=
    (Fi_origin[1] + W_Fi - Plant_Origin[1] - T_ChannelWall + T_PlantWall) if EN_DoubleTrain == 0
    (T_PlantWall + W_FiInletChannel + W_PlantDC + T_ChannelWall) otherwise
    = 3.97335 m
L_PlantUpperDC :=
    (Et_Origin[1] + W_Et - Fi_origin[1] - W_Fi - T_ChannelWall + T_PlantWall) if EN_DoubleTrain == 0
    (Et_Origin[1] + L_EtHopperFront/2 - (Plant_Origin[1] - T_PlantWall) + W_EtDC) otherwise
    = 3.20724 m
L_PlantSideDC := L_FiInletChannel + W_SedInletChannel + 2*T_PlantWall - T_ChannelWall + T_SedWeir
MainDCLower := DrainChannelF(PlantLowerDC_Origin, [270; 0; 0]*deg, Q_PlantDCMax, W_PlantDC, H_PlantDC, L_PlantLowerDC, Slope_PlantDC, Nu_Water, E_Concrete, 1)
MainDCUpper := DrainChannelF(PlantUpperDC_Origin, [270; 0; 0]*deg, Q_PlantDCMax, W_PlantDC, H_PlantDC, L_PlantUpperDC, Slope_PlantDC, Nu_Water, E_Concrete, 1)
SideLowerDC := DrainChannelF(PlantSideDC_Origin, [180; 0; 0]*deg, Q_PlantDCMax, W_PlantDC, H_PlantDC + (L_PlantLowerDC - L_PlantSideDC)*.02, L_PlantSideDC, .02, Nu_Water, E_Concrete, 1)
MainDC := DrainChannelF(PlantDC_Origin, [270; 0; 0]*deg, Q_PlantDCMax, W_PlantDC, H_PlantDC, L_PlantDC, Slope_PlantDC, Nu_Water, E_Concrete, 1)
MainDCScript :=
    stack(MainDCLayer, MainDC) if Z_PlantLowerDCBottom > Z_PlantUpperDCBottom - Slope_PlantDC*L_PlantUpperDC - 10 cm
    stack(MainDCLayer, MainDCLower, MainDCUpper) otherwise
SideDCScript := stack(SideDCLayer, SideLowerDC)
DCWestWallLower :=
    if EN_DoubleTrain == 0
        BoxF([
            Plant_Origin[0] - L_Sed - T_PlantWall - W_PlantDC;
            Plant_Origin[1] - T_PlantWall;
            PlantLowerDC_Origin[2]
        ], [
            Plant_Origin[0] - L_Sed - W_PlantDC - T_PlantWall - T_ChannelWall;
            PlantLowerDC_Origin[1] + L_PlantLowerDC + T_ChannelWall;
            Z_Walkway - T_Floor
        ], [0; 0; 0]*deg)
    otherwise
        BoxF([
            Plant_Origin[0] - L_Sed - T_PlantWall - W_PlantDC;
            Plant_Origin[1] - 2*T_PlantWall - W_FiInletChannel;
            PlantLowerDC_Origin[2]
        ], [
            Plant_Origin[0] - L_Sed - W_PlantDC - T_PlantWall - T_ChannelWall;
            PlantLowerDC_Origin[1] + L_PlantLowerDC + T_ChannelWall;
            Z_Walkway - T_Floor
        ], [0; 0; 0]*deg)
DCWestWallUpper :=
    if EN_DoubleTrain == 0
        BoxF([Plant_Origin[0] - L_Sed - T_PlantWall - W_PlantDC; PlantUpperDC_Origin[1]; PlantUpperDC_Origin[2]], [
            Plant_Origin[0] - L_Sed - W_PlantDC - T_PlantWall - T_ChannelWall;
            Plant_Origin[1] - T_PlantWall + L_PlantDC + T_ChannelWall;
            Z_Walkway - T_Floor
        ], [0; 0; 0]*deg)
    otherwise
        BoxF([Plant_Origin[0] - L_Sed - T_PlantWall - W_PlantDC; PlantUpperDC_Origin[1]; PlantUpperDC_Origin[2]], [
            Plant_Origin[0] - L_Sed - W_PlantDC - T_PlantWall - T_ChannelWall;
            PlantUpperDC_Origin[1] + L_PlantUpperDC;
            Z_Walkway - T_Floor
        ], [0; 0; 0]*deg)
DCEastWallLower :=
    if EN_DoubleTrain == 0
        BoxF([Plant_Origin[0] - L_Sed - T_PlantWall; Plant_Origin[1] - T_PlantWall; PlantLowerDC_Origin[2]], [
            Plant_Origin[0] - L_Sed + T_ChannelWall - T_PlantWall;
            PlantLowerDC_Origin[1] + L_PlantLowerDC + T_ChannelWall;
            Z_Walkway - T_Floor
        ], [0; 0; 0]*deg)
    otherwise
        BoxF([
            Plant_Origin[0] - L_Sed - T_PlantWall;
            Plant_Origin[1] - 2*T_PlantWall - W_FiInletChannel;
            PlantLowerDC_Origin[2]
        ], [
            Plant_Origin[0] - L_Sed + T_ChannelWall - T_PlantWall;
            PlantLowerDC_Origin[1] + L_PlantLowerDC + T_ChannelWall;
            Z_Walkway - T_Floor
        ], [0; 0; 0]*deg)
DCEastWallUpper :=
    if EN_DoubleTrain == 0
        BoxF([Plant_Origin[0] - L_Sed - T_PlantWall; PlantUpperDC_Origin[1]; PlantUpperDC_Origin[2]], [
            Plant_Origin[0] - L_Sed + T_ChannelWall - T_PlantWall;
            Plant_Origin[1] - T_PlantWall + L_PlantDC + T_ChannelWall;
            Z_Walkway - T_Floor
        ], [0; 0; 0]*deg)
    otherwise
        BoxF([Plant_Origin[0] - L_Sed - T_PlantWall; PlantUpperDC_Origin[1]; PlantUpperDC_Origin[2]], [
            Plant_Origin[0] - L_Sed + T_ChannelWall - T_PlantWall;
            PlantUpperDC_Origin[1] + L_PlantUpperDC;
            Z_Walkway - T_Floor
        ], [0; 0; 0]*deg)
DCNorthWall :=
    if EN_DoubleTrain == 0
        BoxF([Plant_Origin[0] - L_Sed; Plant_Origin[1] - T_ChannelWall + L_PlantDC; PlantUpperDC_Origin[2]], [
            Plant_Origin[0] - L_Sed - T_ChannelWall - W_PlantDC - T_PlantWall;
            Plant_Origin[1] + L_PlantDC;
            Z_Walkway - T_Floor
        ], [0; 0; 0]*deg)
    otherwise
        BoxF([
            Plant_Origin[0] - L_Sed - T_PlantWall + T_ChannelWall;
            (PlantUpperDC_Origin[1] + L_PlantUpperDC) + T_ChannelWall;
            PlantUpperDC_Origin[2]
        ], [
            Plant_Origin[0] - L_Sed - T_ChannelWall - W_PlantDC - T_PlantWall;
            PlantUpperDC_Origin[1] + L_PlantUpperDC;
            Z_Walkway - T_Floor
        ], [0; 0; 0]*deg)
DCSideNorthWall := BoxF([
    Plant_Origin[0] - L_Sed - T_PlantWall;
    Plant_Origin[1] - 2*T_PlantWall - W_FiInletChannel + T_ChannelWall;
    Z_PlantLowerDCBottom + H_PlantDC
], [
    Plant_Origin[0] - L_Sed - T_PlantWall + L_PlantSideDC + T_ChannelWall;
    Plant_Origin[1] - 2*T_PlantWall - W_FiInletChannel;
    Z_Walkway - T_Floor
], [0; 0; 0]*deg)
DCSideSouthWall := BoxF([
    Plant_Origin[0] - L_Sed - T_PlantWall;
    Plant_Origin[1] - 2*T_PlantWall - W_FiInletChannel - W_PlantDC;
    Z_PlantLowerDCBottom + H_PlantDC
], [
    Plant_Origin[0] - L_Sed - T_PlantWall + L_PlantSideDC + T_ChannelWall;
    Plant_Origin[1] - 2*T_PlantWall - W_FiInletChannel - T_ChannelWall - W_PlantDC;
    Z_Walkway - T_Floor
], [0; 0; 0]*deg)
DCSideOuterWall := BoxF([
    Plant_Origin[0] - L_Sed - T_PlantWall + L_PlantSideDC + T_ChannelWall;
    Plant_Origin[1] - 2*T_PlantWall - W_FiInletChannel;
    Z_PlantLowerDCBottom + H_PlantDC
], [
    Plant_Origin[0] - L_Sed - T_PlantWall + L_PlantSideDC;
    Plant_Origin[1] - 2*T_PlantWall - W_FiInletChannel - T_ChannelWall - W_PlantDC;
    Z_Walkway - T_Floor
], [0; 0; 0]*deg)
DCDropoffWall := BoxF([
    Plant_Origin[0] - L_Sed - T_PlantWall + T_ChannelWall;
    PlantLowerDC_Origin[1] + L_PlantLowerDC;
    PlantLowerDC_Origin[2]
], [
    Plant_Origin[0] - L_Sed - T_PlantWall - W_PlantDC - T_ChannelWall;
    PlantLowerDC_Origin[1] + L_PlantLowerDC + T_ChannelWall;
    PlantUpperDC_Origin[2] - H_PlantDC - Slope_PlantDC*L_PlantUpperDC
], [0; 0; 0]*deg)
DrainChannelRMRecessWalls := BoxF([
    Plant_Origin[0] - L_Sed - T_PlantWall;
    Et_Origin[1] + W_Et + T_PlantWall;
    PlantUpperDC_Origin[2] - T_ChannelWall - H_PlantDC
], [
    FlocCoupling_Origin[0] + ConRadius(ND_RMPipe) + S_Fitting + T_ChannelWall;
    Floc_Origin[1] + N_FlocChannels*(W_FlocChannel + T_FlocChannelWall) - T_FlocChannelWall + T_PlantWall - T_ChannelWall;
    Z_Walkway - T_Floor
], [0; 0; 0]*deg)
FrzDrainChannel := FreezeLayer("DrainChannelCon")
FrzSideDrainChannel := FreezeLayer("DrainChannelSideCon")
FiInletChannelDCCutout := BoxF([
    Plant_Origin[0] - L_Sed - T_PlantWall - W_PlantDC;
    FiInletChannel_Origin[1] - T_PlantWall;
    FiInletChannel_Origin[2] - T_PlantWall
], [
    Plant_Origin[0] - L_Sed - W_PlantDC - 2*T_PlantWall;
    FiInletChannel_Origin[1] + T_PlantWall + L_FiInletChannel;
    Z_Walkway - T_Floor
], [0; 0; 0]*deg)
SedDCCutout := BoxF([Plant_Origin[0] - L_Sed; Plant_Origin[1] - T_PlantWall; Plant_Origin[2] - T_PlantWall], [
    Plant_Origin[0] - L_Sed - T_PlantWall;
    Plant_Origin[1] + W_Sed*N_SedTanks + T_SedWallDivider*N_SedTanks - T_SedWallDivider + T_PlantWall;
    Z_Walkway - T_Floor
], [0; 0; 0]*deg)
MirrorSedDCCutout := Mirror3dLast("yz", [Floc_Origin[0] - L_Floc - W_PlantDC/2 - T_PlantWall; 0 m], "n")
DrainChannelRMRecessCutout1 := BoxF([
    Plant_Origin[0] - L_Sed - T_PlantWall;
    Et_Origin[1] + W_Et + T_PlantWall - T_ChannelWall;
    PlantUpperDC_Origin[2] - H_PlantDC
], [
    FlocCoupling_Origin[0] + ConRadius(ND_RMPipe) + S_Fitting;
    Floc_Origin[1] + N_FlocChannels*(W_FlocChannel + T_FlocChannelWall) - T_FlocChannelWall + T_PlantWall;
    Z_Walkway - T_Floor + zc
], [0; 0; 0]*deg)
EtDrainChannelCutout := BoxF([
    FlocCoupling_Origin[0] + ConRadius(ND_RMPipe) + S_Fitting;
    EtDC_Origin[1] + W_EtDC;
    Et_Origin[2] - T_PlantWall
], [
    FlocCoupling_Origin[0] + ConRadius(ND_RMPipe) + S_Fitting + T_ChannelWall;
    EtDC_Origin[1];
    EtDC_Origin[2] - H_EtDC - Slope_EtDC*L_EtDC
], [0; 0; 0]*deg)
DrainChannelBoxCutout := BoxF([
    Plant_Origin[0] - L_Sed - T_PlantWall - W_PlantDC;
    PlantUpperDC_Origin[1];
    Z_PlantUpperDCBottom - Slope_PlantDC*L_PlantUpperDC
], [Plant_Origin[0] - L_Sed - T_PlantWall; PlantUpperDC_Origin[1] - T_PlantWall; Plant_Origin[2]], [0; 0; 0]*deg)
DrainChannelWedgeCutout := WedgeF([
    Plant_Origin[0] - L_Sed - T_PlantWall;
    PlantUpperDC_Origin[1] - T_ChannelWall;
    Z_PlantUpperDCBottom - Slope_PlantDC*L_PlantUpperDC
], [
    Plant_Origin[0] - L_Sed - T_PlantWall - T_ChannelWall;
    PlantUpperDC_Origin[1] - T_ChannelWall - W_PlantDC;
    Z_PlantUpperDCBottom - Slope_PlantDC*(L_PlantUpperDC + T_ChannelWall)
], [270; 0; 0]*deg)
FiDrainChannelCutout := BoxF([
    Plant_Origin[0] - L_Sed - T_PlantWall - W_PlantDC - T_PlantWall;
    Plant_Origin[1] - 2*T_PlantWall - W_FiInletChannel - W_PlantDC - T_ChannelWall;
    Z_PlantLowerDCBottom + H_PlantDC
], [
    Plant_Origin[0] - L_Sed;
    Plant_Origin[1] - 2*T_PlantWall - W_FiInletChannel;
    Z_PlantLowerDCBottom - (L_PlantLowerDC - T_PlantWall - W_PlantDC)*Slope_PlantDC
], [0; 0; 0]*deg)
FiInletChannelCutout := BoxF([
    Plant_Origin[0] - L_Sed - T_PlantWall + L_PlantSideDC + T_ChannelWall;
    Plant_Origin[1] - 2*T_PlantWall - W_FiInletChannel - T_ChannelWall - W_PlantDC;
    Z_Walkway - T_Floor
], [
    Plant_Origin[0] - L_Sed - T_PlantWall;
    Plant_Origin[1] - 2*T_PlantWall - W_FiInletChannel - W_PlantDC;
    Z_FiInletChannelBottom - T_PlantWall
], [0; 0; 0]*deg)
MirrorFiInletChannelCutout := Mirror3dLast("yz", [Floc_Origin[0] - L_Floc - W_PlantDC/2 - T_PlantWall; 0 m], "n")
EtRMDCCutout := CylinderF(FlocCoupling_Origin + [0; -SocketDepth(ND_RMPipe); 0], outerradius(ND_RMPipe), 2*T_ChannelWall, [270; 0]*deg)
SubtractDCCutouts := SubtractF(["DrainChannelCon"], "DeleteMe")
SubtractDCSideCutouts := SubtractF(["DrainChannelSideCon"], "DeleteMe")
DCUpperWallsHigh := stack(DCWestWallLower, DCWestWallUpper, DCEastWallLower, DCEastWallUpper, DCNorthWall, Union_All, FrzDrainChannel)
DCUpperWalls :=
    stack(DCWestWallLower, DCWestWallUpper, DCEastWallLower, DCEastWallUpper, DCNorthWall, DrainChannelRMRecessWalls, Union_All, FrzDrainChannel) if Z_PlantLowerDCBottom > Z_PlantUpperDCBottom - Slope_PlantDC*L_PlantUpperDC - 10 cm
    stack(DCWestWallLower, DCWestWallUpper, DCEastWallLower, DCEastWallUpper, DCNorthWall, DCDropoffWall, DrainChannelRMRecessWalls, Union_All, FrzDrainChannel) otherwise
DCUpperSideWalls := stack(DCSideNorthWall, DCSideSouthWall, DCSideOuterWall, Union_All, FrzSideDrainChannel)
DCWallCutouts := stack(FiInletChannelDCCutout, SedDCCutout, DrainChannelRMRecessCutout1, DrainChannelBoxCutout, DrainChannelWedgeCutout, EtDrainChannelCutout, EtRMDCCutout, GroupDelete, SubtractDCCutouts)
DCWallCutoutsHigh := stack(SedDCCutout, MirrorSedDCCutout, DrainChannelBoxCutout, DrainChannelWedgeCutout, EtDrainChannelCutout, FiDrainChannelCutout, GroupDelete, SubtractDCCutouts)
DCSideWallCutouts := stack(FiInletChannelCutout, GroupDelete, SubtractDCSideCutouts)
PlantDrainChannelScript :=
    stack(MainDCScript, DCUpperWalls, DCWallCutouts) if EN_DoubleTrain == 0
    stack(MainDCScript, DCUpperWallsHigh, DCWallCutoutsHigh, SideDCScript, DCUpperSideWalls, DCSideWallCutouts, ThawMultiple(["DrainChannelCon"; "DrainChannelSideCon"]), Union_All, FreezeMultiple(["DrainChannelCon"; "DrainChannelSideCon"])) otherwise
# Filter Box Manifold Connections: Fernco Couplings, Outer Wall Couplings, and Through-wall Pipes
# Fernco Couplings
LayerFiFernco := layer_new("FiFerncoCouplingsPlu", purple)
FiFerncoBwCoupling := FerncoCouplingF(FiFerncoBwCoupling_origin, [
    {
        0 if EN_DoubleTrain == 0
        90 otherwise
    };
    0;
    0
]*deg, ND_FiBwTrunk, L_FiManFerncoCoupling)
FiFerncoCoupling := FerncoCouplingF(FiFerncoCouplings_origin, [
    {
        0 if EN_DoubleTrain == 0
        90 otherwise
    };
    0;
    0
], ND_FiTrunk, L_FiManFerncoCoupling)
ArrayFiManifoldLast := ArrayLast(N_FiLayer, 1, H_FiLayer)
LayerFiFerncoFreeze := FreezeLayer("FiFerncoCouplingsPlu")
FiFerncoScript := stack(LayerFiFernco, FiFerncoBwCoupling, FiFerncoCoupling, view("f"), ArrayFiManifoldLast, view("t"), LayerFiFerncoFreeze)
# Filter Wall Couplings
LayerFiFittingPlu := layer_new("FiFittingsPlu", green)
FiWallBwCoupling := CouplingF(FiWallBwCoupling_origin, [
    {
        0 if EN_DoubleTrain == 0
        (-90) otherwise
    };
    0
]*deg, ND_FiBwTrunk, PS_Default)
FiWallCoupling := CouplingF(FiWallCouplings_origin, [
    {
        0 if EN_DoubleTrain == 0
        (-90) otherwise
    };
    0
]*deg, ND_FiTrunk, PS_Default)
LayerFiFittingFrz := FreezeLayer("FiFittingsPlu")
FiWallCouplingScript := stack(LayerFiFittingPlu, FiWallBwCoupling, FiWallCoupling, view("f"), ArrayFiManifoldLast, view("t"), LayerFiFittingFrz)
# Through-wall Pipes
LayerFiPipePlu := layer_new("FiPipePlu", blue)
FiBwConPipe :=
    PipeSUBF(FiWallBwCoupling_origin - [CouplingLength(ND_FiBwTrunk) - 2*SocketDepth(ND_FiBwTrunk); 0 m; 0 m], L_FiManFerncoCoupling/2 + T_FiWall + SocketDepth(ND_FiBwTrunk), [0; 0; 0]*deg, ND_FiBwTrunk, PS_Default, ["FiTankCon"]) if EN_DoubleTrain == 0
    PipeSUBF(FiWallBwCoupling_origin + [0 m; 0 m; 0 m], L_FiManFerncoCoupling/2 + T_FiWall + SocketDepth(ND_FiBwTrunk), [90; 0; 0]*deg, ND_FiBwTrunk, PS_Default, ["FiTankCon"]) otherwise
FiConPipe1 :=
    PipeSUBF(FiWallCouplings_origin + [-CouplingLength(ND_FiTrunk) + 2*SocketDepth(ND_FiTrunk); 0 m; 0 m], L_FiManFerncoCoupling/2 + T_FiWall + SocketDepth(ND_FiTrunk), [0; 0; 0]*deg, ND_FiTrunk, PS_Default, ["FiTankCon"]) if EN_DoubleTrain == 0
    PipeSUBF(FiWallCouplings_origin + [0 m; 0 m; 0 m], L_FiManFerncoCoupling/2 + T_FiWall + SocketDepth(ND_FiTrunk), [90; 0; 0]*deg, ND_FiTrunk, PS_Default, ["FiTankCon"]) otherwise
FiConPipe2 :=
    PipeSUBF(FiWallCouplings_origin + [-CouplingLength(ND_FiTrunk) + 2*SocketDepth(ND_FiTrunk); 0 m; H_FiLayer], L_FiManFerncoCoupling/2 + T_FiWall + SocketDepth(ND_FiTrunk), [0; 0; 0]*deg, ND_FiTrunk, PS_Default, ["FiTankCon"]) if EN_DoubleTrain == 0
    PipeSUBF(FiWallCouplings_origin + [0 m; 0 m; H_FiLayer], L_FiManFerncoCoupling/2 + T_FiWall + SocketDepth(ND_FiTrunk), [90; 0; 0]*deg, ND_FiTrunk, PS_Default, ["FiTankCon"]) otherwise
FiConPipe3 :=
    PipeSUBF(FiWallCouplings_origin + [-CouplingLength(ND_FiTrunk) + 2*SocketDepth(ND_FiTrunk); 0 m; 2*H_FiLayer], L_FiManFerncoCoupling/2 + T_FiWall + SocketDepth(ND_FiTrunk), [0; 0; 0]*deg, ND_FiTrunk, PS_Default, ["FiTankCon"]) if EN_DoubleTrain == 0
    PipeSUBF(FiWallCouplings_origin + [0 m; 0 m; 2*H_FiLayer], L_FiManFerncoCoupling/2 + T_FiWall + SocketDepth(ND_FiTrunk), [90; 0; 0]*deg, ND_FiTrunk, PS_Default, ["FiTankCon"]) otherwise
FiConPipe4 :=
    PipeSUBF(FiWallCouplings_origin + [-CouplingLength(ND_FiTrunk) + 2*SocketDepth(ND_FiTrunk); 0 m; 3*H_FiLayer], L_FiManFerncoCoupling/2 + T_FiWall + SocketDepth(ND_FiTrunk), [0; 0; 0]*deg, ND_FiTrunk, PS_Default, ["FiTankCon"]) if EN_DoubleTrain == 0
    PipeSUBF(FiWallCouplings_origin + [0 m; 0 m; 3*H_FiLayer], L_FiManFerncoCoupling/2 + T_FiWall + SocketDepth(ND_FiTrunk), [90; 0; 0]*deg, ND_FiTrunk, PS_Default, ["FiTankCon"]) otherwise
FiConPipe5 :=
    PipeSUBF(FiWallCouplings_origin + [-CouplingLength(ND_FiTrunk) + 2*SocketDepth(ND_FiTrunk); 0 m; 4*H_FiLayer], L_FiManFerncoCoupling/2 + T_FiWall + SocketDepth(ND_FiTrunk), [0; 0; 0]*deg, ND_FiTrunk, PS_Default, ["FiTankCon"]) if EN_DoubleTrain == 0
    PipeSUBF(FiWallCouplings_origin + [0 m; 0 m; 4*H_FiLayer], L_FiManFerncoCoupling/2 + T_FiWall + SocketDepth(ND_FiTrunk), [90; 0; 0]*deg, ND_FiTrunk, PS_Default, ["FiTankCon"]) otherwise
FiConPipe6 :=
    PipeSUBF(FiWallCouplings_origin + [-CouplingLength(ND_FiTrunk) + 2*SocketDepth(ND_FiTrunk); 0 m; 5*H_FiLayer], L_FiManFerncoCoupling/2 + T_FiWall + SocketDepth(ND_FiTrunk), [0; 0; 0]*deg, ND_FiTrunk, PS_Default, ["FiTankCon"]) if EN_DoubleTrain == 0
    PipeSUBF(FiWallCouplings_origin + [0 m; 0 m; 5*H_FiLayer], L_FiManFerncoCoupling/2 + T_FiWall + SocketDepth(ND_FiTrunk), [90; 0; 0]*deg, ND_FiTrunk, PS_Default, ["FiTankCon"]) otherwise
LayerFiPipeFrz := FreezeLayer("FiPipePlu")
FiWallPipeScript := stack(LayerFiPipePlu, FiBwConPipe, FiConPipe1, FiConPipe2, FiConPipe3, FiConPipe4, FiConPipe5, FiConPipe6, LayerFiPipeFrz)
FiManWallScript := stack(FiFerncoScript, FiWallCouplingScript, FiWallPipeScript)
# Manifold Trunks and Branch Receivers
# Branch Receivers
LayerFiManPipe := layer_new("FiManPipePlu", blue)
FiBranchHolder := PipeF({
    if EN_DoubleTrain == 0
        [
            Fi_origin[0] - CapThickness(ND_FiBranchHolder) - S_FiManAssembly;
            Fi_origin[1] + ConRadius(ND_FiBwBranchHolder) + S_FiManAssembly;
            Fi_origin[2] + H_FiBottomLayer + outerradius(ND_FiBwManBranch)
        ]
    otherwise
        [
            Fi_origin[0] + ConRadius(ND_FiBwBranchHolder) + S_FiManAssembly - W_Fi;
            Fi_origin[1] + CapThickness(ND_FiBranchHolder) + S_FiManAssembly;
            Fi_origin[2] + H_FiBottomLayer + outerradius(ND_FiBwManBranch)
        ]
}, L_Fi - 2*CapThickness(ND_FiBranchHolder) - 2*S_FiManAssembly, {
    ([0; 0]*deg) if EN_DoubleTrain == 0
    ([-90; 0]*deg) otherwise
}, ND_FiBranchHolder, PS_Default)
LayerFiManCaps := layer_new("FiManCapPlu", green)
FiBranchHolderCapRight :=
    if EN_DoubleTrain == 0
        CapF([
            Fi_origin[0] - CapThickness(ND_FiBranchHolder) - S_FiManAssembly;
            Fi_origin[1] + ConRadius(ND_FiBwBranchHolder) + S_FiManAssembly;
            Fi_origin[2] + H_FiBottomLayer + outerradius(ND_FiBwManBranch)
        ], [0; 0]*deg, ND_FiBranchHolder)
    otherwise
        CapF([
            Fi_origin[0] + ConRadius(ND_FiBwBranchHolder) + S_FiManAssembly - W_Fi;
            Fi_origin[1] + CapThickness(ND_FiBranchHolder) + S_FiManAssembly;
            Fi_origin[2] + H_FiBottomLayer + outerradius(ND_FiBwManBranch)
        ], [270; 0]*deg, ND_FiBranchHolder)
FiBranchHolderCapLeft :=
    if EN_DoubleTrain == 0
        CapF([
            Fi_origin[0] - L_Fi + S_FiManAssembly + CapThickness(ND_FiBranchHolder);
            Fi_origin[1] + ConRadius(ND_FiBwBranchHolder) + S_FiManAssembly;
            Fi_origin[2] + H_FiBottomLayer + outerradius(ND_FiBwManBranch)
        ], [180; 0]*deg, ND_FiBranchHolder)
    otherwise
        CapF([
            Fi_origin[0] + ConRadius(ND_FiBwBranchHolder) + S_FiManAssembly - W_Fi;
            Fi_origin[1] - CapThickness(ND_FiBranchHolder) - S_FiManAssembly + L_Fi;
            Fi_origin[2] + H_FiBottomLayer + outerradius(ND_FiBwManBranch)
        ], [90; 0]*deg, ND_FiBranchHolder)
ArrayFiBranchHolder :=
    Array_All(2, 1, W_Fi - 2*ConRadius(ND_FiBwBranchHolder) - 2*S_FiManAssembly) if EN_DoubleTrain == 0
    Array_All(1, 2, W_Fi - 2*ConRadius(ND_FiBwBranchHolder) - 2*S_FiManAssembly) otherwise
FiManBranchRecThaw := ThawMultiple(["FiManPipePlu"; "FiManCapPlu"])
FiManPipeFrz := FreezeLayer("FiManPipePlu")
FiManCapFrz := FreezeLayer("FiManCapPlu")
FiManBranchRecFrz := FreezeMultiple(["FiManPipePlu"; "FiManCapPlu"])
FiBranchHolderScript := stack(LayerFiManPipe, FiBranchHolder, FiManPipeFrz, LayerFiManCaps, FiBranchHolderCapRight, FiBranchHolderCapLeft, FiManCapFrz, FiManBranchRecThaw, ArrayFiBranchHolder, FiManBranchRecFrz)
# Manifold Trunks
SelectFiManPipes := SelectLayer("FiManPipePlu")
FiTrunk :=
    if EN_DoubleTrain == 0
        PipeF([
            Fi_origin[0] - L_FiManFerncoCoupling/2;
            FiBwInletCoupling_origin[1];
            Fi_origin[2] + H_FiBottomLayer + outerradius(ND_FiBwManBranch)
        ], L_FiTrunk, [0; 0]*deg, ND_FiTrunk, PS_Default)
    otherwise
        PipeF([
            FiBwInletCoupling_origin[0];
            Fi_origin[1] - L_FiManFerncoCoupling/2 + L_Fi;
            Fi_origin[2] + H_FiBottomLayer + outerradius(ND_FiBwManBranch)
        ], L_FiTrunk, [90; 0]*deg, ND_FiTrunk, PS_Default)
SelectFiManCaps := SelectLayer("FiManCapPlu")
FiTrunkCap :=
    if EN_DoubleTrain == 0
        CapF([
            Fi_origin[0] - L_FiManFerncoCoupling/2 - L_FiTrunk;
            FiBwInletCoupling_origin[1];
            Fi_origin[2] + H_FiBottomLayer + outerradius(ND_FiBwManBranch)
        ], [180; 0]*deg, ND_FiTrunk)
    otherwise
        CapF([
            FiBwInletCoupling_origin[0];
            Fi_origin[1] - L_FiManFerncoCoupling/2 - L_FiTrunk + L_Fi;
            Fi_origin[2] + H_FiBottomLayer + outerradius(ND_FiBwManBranch)
        ], [-90; 0]*deg, ND_FiTrunk)
FiTrunkScript := stack(SelectFiManPipes, FiTrunk, FiManPipeFrz, SelectFiManCaps, FiTrunkCap, FiManCapFrz)
# Trunk and Branch Receiver Holes and Array
FiTrunkOrifice :=
    if EN_DoubleTrain == 0
        CylinderF([
            Fi_origin[0] - L_FiManFerncoCoupling - B_FiManifoldBranch/2;
            Fi_origin[1] + S_FiManAssembly + ConRadius(ND_FiBwBranchHolder);
            Fi_origin[2] + H_FiBottomLayer + outerradius(ND_FiBwManBranch)
        ], outerradius(ND_FiManBranch), W_Fi - 2*ConRadius(ND_FiBwBranchHolder) - 2*S_FiManAssembly, [-90; 0]*deg)
    otherwise
        CylinderF([
            Fi_origin[0] - S_FiManAssembly - ConRadius(ND_FiBwBranchHolder);
            Fi_origin[1] - L_FiManFerncoCoupling - B_FiManifoldBranch/2 + L_Fi;
            Fi_origin[2] + H_FiBottomLayer + outerradius(ND_FiBwManBranch)
        ], outerradius(ND_FiManBranch), W_Fi - 2*ConRadius(ND_FiBwBranchHolder) - 2*S_FiManAssembly, [0; 0]*deg)
ArrayFiTrunkOrifice :=
    ArrayLast(1, N_FiManBranch/2, -B_FiManifoldBranch) if EN_DoubleTrain == 0
    ArrayLast(N_FiManBranch/2, 1, -B_FiManifoldBranch) otherwise
SubtractFiManPipeOrifices := SubtractF(["FiManPipePlu"], "DeleteMe")
SubtractFiManCapOrifices := SubtractF(["FiManCapPlu"], "DeleteMe")
ArrayFiTrunks := array_all(N_FiLayer, 1, H_FiLayer)
FiManTrunkOrificeScript := stack(FiTrunkOrifice, ArrayFiTrunkOrifice, GroupDelete, SubtractFiManPipeOrifices, FiTrunkOrifice, ArrayFiTrunkOrifice, GroupDelete, SubtractFiManCapOrifices, SelectFiManPipes, SelectFiManCaps, view("f"), ArrayFiTrunks, view("t"), FiManPipeFrz, FiManCapFrz)
# Backwash Trunk
FiBwTrunk :=
    if EN_DoubleTrain == 0
        PipeF([
            Fi_origin[0] - L_FiManFerncoCoupling/2;
            FiBwInletCoupling_origin[1];
            Fi_origin[2] + outerradius(ND_FiBwManBranch)
        ], L_FiBwTrunk, [0; 0]*deg, ND_FiBwTrunk, PS_Default)
    otherwise
        PipeF([
            FiBwInletCoupling_origin[0];
            Fi_origin[1] - L_FiManFerncoCoupling/2 + L_Fi;
            Fi_origin[2] + outerradius(ND_FiBwManBranch)
        ], L_FiBwTrunk, [90; 0]*deg, ND_FiBwTrunk, PS_Default)
FiBwTrunkCap :=
    if EN_DoubleTrain == 0
        CapF([
            Fi_origin[0] - L_FiManFerncoCoupling/2 - L_FiBwTrunk;
            FiBwInletCoupling_origin[1];
            Fi_origin[2] + outerradius(ND_FiBwManBranch)
        ], [180; 0; 0]*deg, ND_FiBwTrunk)
    otherwise
        CapF([
            FiBwInletCoupling_origin[0];
            Fi_origin[1] - L_FiManFerncoCoupling/2 - L_FiBwTrunk + L_Fi;
            Fi_origin[2] + outerradius(ND_FiBwManBranch)
        ], [-90; 0; 0]*deg, ND_FiBwTrunk)
FiBwManTrunkScript := stack(SelectFiManPipes, FiBwTrunk, FiManPipeFrz, SelectFiManCaps, FiBwTrunkCap, FiManCapFrz)
# Backwash Branch Receivers
FiBwBranchReceiver :=
    if EN_DoubleTrain == 0
        PipeF([
            Fi_origin[0] - CapThickness(ND_FiBwBranchHolder) - S_FiManAssembly;
            Fi_origin[1] + ConRadius(ND_FiBwBranchHolder) + S_FiManAssembly;
            Fi_origin[2] + outerradius(ND_FiBwManBranch)
        ], L_Fi - 2*CapThickness(ND_FiBranchHolder) - 2*S_FiManAssembly, [0; 0]*deg, ND_FiBwBranchHolder, PS_Default)
    otherwise
        PipeF([
            Fi_origin[0] + (ConRadius(ND_FiBwBranchHolder) + S_FiManAssembly) - W_Fi;
            Fi_origin[1] + CapThickness(ND_FiBwBranchHolder) + S_FiManAssembly;
            Fi_origin[2] + outerradius(ND_FiBwManBranch)
        ], L_Fi - 2*CapThickness(ND_FiBranchHolder) - 2*S_FiManAssembly, [-90; 0]*deg, ND_FiBwBranchHolder, PS_Default)
FiBwBranchReceiverCapR :=
    if EN_DoubleTrain == 0
        CapF([
            Fi_origin[0] - CapThickness(ND_FiBwBranchHolder) - S_FiManAssembly;
            Fi_origin[1] + ConRadius(ND_FiBwBranchHolder) + S_FiManAssembly;
            Fi_origin[2] + outerradius(ND_FiBwManBranch)
        ], [0; 0; 0]*deg, ND_FiBwBranchHolder)
    otherwise
        CapF([
            Fi_origin[0] + (ConRadius(ND_FiBwBranchHolder) + S_FiManAssembly) - W_Fi;
            (Fi_origin[1] + CapThickness(ND_FiBwBranchHolder)) + S_FiManAssembly;
            Fi_origin[2] + outerradius(ND_FiBwManBranch)
        ], [-90; 0; 0]*deg, ND_FiBwBranchHolder)
FiBwBranchReceiverCapL :=
    if EN_DoubleTrain == 0
        CapF([
            Fi_origin[0] - L_Fi + S_FiManAssembly + CapThickness(ND_FiBwBranchHolder);
            Fi_origin[1] + ConRadius(ND_FiBwBranchHolder) + S_FiManAssembly;
            Fi_origin[2] + outerradius(ND_FiBwManBranch)
        ], [180; 0; 0]*deg, ND_FiBwBranchHolder)
    otherwise
        CapF([
            Fi_origin[0] + (ConRadius(ND_FiBwBranchHolder) + S_FiManAssembly) - W_Fi;
            Fi_origin[1] + L_Fi - S_FiManAssembly - CapThickness(ND_FiBwBranchHolder);
            Fi_origin[2] + outerradius(ND_FiBwManBranch)
        ], [90; 0; 0]*deg, ND_FiBwBranchHolder)
ArrayFiBwBranchHolder :=
    ArrayLast(2, 1, W_Fi - 2*ConRadius(ND_FiBwBranchHolder) - 2*S_FiManAssembly) if EN_DoubleTrain == 0
    ArrayLast(1, 2, W_Fi - 2*ConRadius(ND_FiBwBranchHolder) - 2*S_FiManAssembly) otherwise
FiBwBranchReceiverScript := stack(SelectFiManPipes, FiBwBranchReceiver, ArrayFiBwBranchHolder, FiManPipeFrz, SelectFiManCaps, FiBwBranchReceiverCapR, ArrayFiBwBranchHolder, FiBwBranchReceiverCapL, ArrayFiBwBranchHolder, FiManCapFrz)
# Backwash Trunk and Branch Receiver Orifices
FiBwTrunkOrifice :=
    if EN_DoubleTrain == 0
        CylinderF([
            Fi_origin[0] - L_FiManFerncoCoupling - B_FiManifoldBranch/2;
            Fi_origin[1] + ConRadius(ND_FiBwBranchHolder) + S_FiManAssembly;
            Fi_origin[2] + outerradius(ND_FiBwManBranch)
        ], outerradius(ND_FiBwManBranch), W_Fi - 2*ConRadius(ND_FiBwBranchHolder) - 2*S_FiManAssembly, [-90; 0]*deg)
    otherwise
        CylinderF([
            Fi_origin[0] - (ConRadius(ND_FiBwBranchHolder) + S_FiManAssembly);
            Fi_origin[1] - L_FiManFerncoCoupling - B_FiManifoldBranch/2 + L_Fi;
            Fi_origin[2] + outerradius(ND_FiBwManBranch)
        ], outerradius(ND_FiBwManBranch), W_Fi - 2*ConRadius(ND_FiBwBranchHolder) - 2*S_FiManAssembly, [0; 0]*deg)
FiBwTrunkOrificeScript := stack(FiBwTrunkOrifice, ArrayFiTrunkOrifice, GroupDelete, SubtractFiManPipeOrifices, FiBwTrunkOrifice, ArrayFiTrunkOrifice, GroupDelete, SubtractFiManCapOrifices)
# Filter Box Floor Cutouts
FiBwTrunkCutout :=
    if EN_DoubleTrain == 0
        BoxF([
            Fi_origin[0];
            Fi_origin[1] + W_Fi/2 - ConRadius(ND_FiBwTrunk);
            Fi_origin[2] - max(ConRadius(ND_FiBwTrunk), FerncoOuterDiameter(ND_FiBwTrunk)/2) + outerradius(ND_FiBwManBranch)
        ], [Fi_origin[0] - L_Fi; Fi_origin[1] + W_Fi/2 + ConRadius(ND_FiBwTrunk); Fi_origin[2]], [0; 0; 0]*deg)
    otherwise
        BoxF([
            Fi_origin[0] - (W_Fi/2 - ConRadius(ND_FiBwTrunk));
            Fi_origin[1];
            Fi_origin[2] - max(ConRadius(ND_FiBwTrunk), FerncoOuterDiameter(ND_FiBwTrunk)/2) + outerradius(ND_FiBwManBranch)
        ], [Fi_origin[0] - (W_Fi/2 + ConRadius(ND_FiBwTrunk)); Fi_origin[1] + L_Fi; Fi_origin[2]], [0; 0; 0]*deg)
FiBwBranchHolderCutout1 :=
    if EN_DoubleTrain == 0
        BoxF([
            Fi_origin[0];
            Fi_origin[1];
            Fi_origin[2] - ConRadius(ND_FiBwBranchHolder) + outerradius(ND_FiBwManBranch)
        ], [
            Fi_origin[0] - L_Fi;
            Fi_origin[1] + S_FiManAssembly + 2*ConRadius(ND_FiBwBranchHolder);
            Fi_origin[2]
        ], [0; 0; 0]*deg)
    otherwise
        BoxF([
            Fi_origin[0];
            Fi_origin[1];
            Fi_origin[2] - ConRadius(ND_FiBwBranchHolder) + outerradius(ND_FiBwManBranch)
        ], [
            Fi_origin[0] - (S_FiManAssembly + 2*ConRadius(ND_FiBwBranchHolder));
            Fi_origin[1] + L_Fi;
            Fi_origin[2]
        ], [0; 0; 0]*deg)
FiBwBranchHolderCutout2 :=
    if EN_DoubleTrain == 0
        BoxF([
            Fi_origin[0];
            Fi_origin[1] + W_Fi;
            Fi_origin[2] - ConRadius(ND_FiBwBranchHolder) + outerradius(ND_FiBwManBranch)
        ], [
            Fi_origin[0] - L_Fi;
            Fi_origin[1] + W_Fi - 2*ConRadius(ND_FiBwBranchHolder) - S_FiManAssembly;
            Fi_origin[2]
        ], [0; 0; 0]*deg)
    otherwise
        BoxF([
            Fi_origin[0] - W_Fi;
            Fi_origin[1];
            Fi_origin[2] - ConRadius(ND_FiBwBranchHolder) + outerradius(ND_FiBwManBranch)
        ], [
            Fi_origin[0] - W_Fi + 2*ConRadius(ND_FiBwBranchHolder) + S_FiManAssembly;
            Fi_origin[1] + L_Fi;
            Fi_origin[2]
        ], [0; 0; 0]*deg)
SubtractBwTrunkCutouts := SubtractF(["FiTankCon"], "DeleteMe")
FiBoxFloorCutoutScript := stack(FiBwTrunkCutout, FiBwBranchHolderCutout1, FiBwBranchHolderCutout2, GroupDelete, SubtractBwTrunkCutouts)
FiTrunkReceiverScript := stack(FiBranchHolderScript, FiTrunkScript, FiManTrunkOrificeScript, FiBwManTrunkScript, FiBwBranchReceiverScript, FiBwTrunkOrificeScript, FiBoxFloorCutoutScript)
# Manifold Branches
LayerMan := layer_new("FiManBranchPlu", blue3)
FiManBranch :=
    if EN_DoubleTrain == 0
        PipeF(Fi_origin + [
            -L_FiManFerncoCoupling - B_FiManifoldBranch/2;
            S_FiManAssembly + ConRadius(ND_FiBwBranchHolder) + outerradius(ND_FiBranchHolder) - L_FiManBranchExt;
            outerradius(ND_FiBwManBranch) + H_FiBottomLayer
        ], L_FiManBranch, [-90; 0]*deg, ND_FiManBranch, PS_FiBranch)
    otherwise
        PipeF(Fi_origin + [
            -S_FiManAssembly - ConRadius(ND_FiBwBranchHolder) - outerradius(ND_FiBranchHolder) + L_FiManBranchExt;
            -L_FiManFerncoCoupling - B_FiManifoldBranch/2 + L_Fi;
            outerradius(ND_FiBwManBranch) + H_FiBottomLayer
        ], L_FiManBranch, [0; 0]*deg, ND_FiManBranch, PS_FiBranch)
FreezeFiManLayer := FreezeLayer("FiManBranchPlu")
FiManBranchSlot :=
    if EN_DoubleTrain == 0
        BoxF(Fi_origin + [
            -L_FiManFerncoCoupling - B_FiManifoldBranch/2 - outerradius(ND_FiManBranch);
            S_FiManAssembly + ConRadius(ND_FiBwBranchHolder) + outerradius(ND_FiBranchHolder) + B_FiManSlot/2;
            outerradius(ND_FiBwManBranch) + H_FiBottomLayer + H_FiManCenterToSlot
        ], Fi_origin + [
            -L_FiManFerncoCoupling - B_FiManifoldBranch/2 + outerradius(ND_FiManBranch);
            S_FiManAssembly + ConRadius(ND_FiBwBranchHolder) + outerradius(ND_FiBranchHolder) + B_FiManSlot/2 + W_FiManSlots;
            outerradius(ND_FiBwManBranch) + H_FiBottomLayer + outerradius(ND_FiManBranch)
        ], [0; 0; 0]*deg)
    otherwise
        BoxF(Fi_origin + [
            -S_FiManAssembly - ConRadius(ND_FiBwBranchHolder) - outerradius(ND_FiBranchHolder) - B_FiManSlot/2;
            -L_FiManFerncoCoupling - B_FiManifoldBranch/2 - outerradius(ND_FiManBranch);
            outerradius(ND_FiBwManBranch) + H_FiBottomLayer + H_FiManCenterToSlot
        ], Fi_origin + [
            -(S_FiManAssembly + ConRadius(ND_FiBwBranchHolder) + outerradius(ND_FiBranchHolder) + B_FiManSlot/2 + W_FiManSlots);
            -L_FiManFerncoCoupling - B_FiManifoldBranch/2 + outerradius(ND_FiManBranch);
            outerradius(ND_FiBwManBranch) + H_FiBottomLayer + outerradius(ND_FiManBranch)
        ], [90; 0; 0]*deg)
MirrorFiManBranchSlot := MirrorLast([Fi_origin[1] + 0 m; Fi_origin[2] + outerradius(ND_FiBwManBranch) + H_FiBottomLayer], [Fi_origin[1] + zc; Fi_origin[2] + outerradius(ND_FiBwManBranch) + H_FiBottomLayer], "N")
ArrayFiManBranchSlot :=
    array_all(N_FiManSlotsPerRow, 1, B_FiManSlot) if EN_DoubleTrain == 0
    array_all(1, N_FiManSlotsPerRow, B_FiManSlot) otherwise
SubtractFiManSlots := SubtractF(["FiManBranchPlu"], "DeleteMe")
SelectFiManBranch := SelectLayer("FiManBranchPlu")
ArrayFiMan := array_all(N_FiLayer, 1, H_FiLayer)
# Do not stack unless you are drawing only the slotted pipes. The slots make the 3D model unmanagable.
FiBranchScriptSlots := stack(LayerMan, FiManBranch, FreezeFiManLayer, FiManBranchSlot, view("r"), MirrorFiManBranchSlot, view("t"), ArrayFiManBranchSlot, GroupDelete, SubtractFiManSlots, SelectFiManBranch, BrepAll, view("f"), ArrayFiMan, view("t"))
FiBranchScript := stack(LayerMan, FiManBranch, view("f"), ArrayFiMan, view("t"))
BwManBranch :=
    if EN_DoubleTrain == 0
        PipeF(Fi_origin + [
            -L_FiManFerncoCoupling - B_FiManifoldBranch/2;
            S_FiManAssembly + ConRadius(ND_FiBwBranchHolder) + outerradius(ND_FiBwBranchHolder) - L_FiManBranchExt;
            outerradius(ND_FiBwManBranch)
        ], L_FiBwManBranch, [-90; 0]*deg, ND_FiBwManBranch, PS_FiBranch)
    otherwise
        PipeF(Fi_origin + [
            -(S_FiManAssembly + ConRadius(ND_FiBwBranchHolder) + outerradius(ND_FiBwBranchHolder) - L_FiManBranchExt);
            -L_FiManFerncoCoupling - B_FiManifoldBranch/2 + L_Fi;
            outerradius(ND_FiBwManBranch)
        ], L_FiBwManBranch, [0; 0]*deg, ND_FiBwManBranch, PS_FiBranch)
FiBwManBranchSlot :=
    if EN_DoubleTrain == 0
        BoxF(Fi_origin + [
            -L_FiManFerncoCoupling - B_FiManifoldBranch/2 - outerradius(ND_FiBwManBranch);
            S_FiManAssembly + ConRadius(ND_FiBwBranchHolder) + outerradius(ND_FiBwBranchHolder) + B_FiBwManSlot/2;
            outerradius(ND_FiBwManBranch) + H_FiBwManCenterToSlot
        ], Fi_origin + [
            -L_FiManFerncoCoupling - B_FiManifoldBranch/2 + outerradius(ND_FiBwManBranch);
            S_FiManAssembly + ConRadius(ND_FiBwBranchHolder) + outerradius(ND_FiBwBranchHolder) + B_FiBwManSlot/2 + W_FiManSlots;
            outerdiameter(ND_FiBwManBranch)
        ], [0; 0; 0]*deg)
    otherwise
        BoxF(Fi_origin + [
            -(S_FiManAssembly + ConRadius(ND_FiBwBranchHolder) + outerradius(ND_FiBwBranchHolder) + B_FiBwManSlot/2);
            -L_FiManFerncoCoupling - B_FiManifoldBranch/2 - outerradius(ND_FiBwManBranch);
            outerradius(ND_FiBwManBranch) + H_FiBwManCenterToSlot
        ], Fi_origin + [
            -(S_FiManAssembly + ConRadius(ND_FiBwBranchHolder) + outerradius(ND_FiBwBranchHolder) + B_FiBwManSlot/2 + W_FiManSlots);
            -L_FiManFerncoCoupling - B_FiManifoldBranch/2 + outerradius(ND_FiBwManBranch);
            outerdiameter(ND_FiBwManBranch)
        ], [90; 0; 0]*deg)
ArrayFiBwManBranchSlot :=
    ArrayLast(N_FiBwManSlotsPerRow, 1, B_FiBwManSlot) if EN_DoubleTrain == 0
    ArrayLast(1, N_FiBwManSlotsPerRow, B_FiBwManSlot) otherwise
MirrorFiManBranches :=
    Mirror3dAll("zx", [Fi_origin[0]; Fi_origin[1] + W_Fi/2], "n") if EN_DoubleTrain == 0
    Mirror3dAll("yz", [Fi_origin[0] - W_Fi/2; Fi_origin[1]], "n") otherwise
ArrayManBranches :=
    array_all(1, N_FiManBranch/2, -B_FiManifoldBranch) if EN_DoubleTrain == 0
    array_all(N_FiManBranch/2, 1, -B_FiManifoldBranch) otherwise
# Do not stack unless you are drawing only the slotted pipes. The slots make the 3D model unmanagable.
FiBwBranchScriptSlots := stack(BwManBranch, FreezeFiManLayer, FiBwManBranchSlot, ArrayFiBwManBranchSlot, GroupDelete, SubtractFiManSlots, SelectFiManBranch, BrepAll, ArrayManBranches, MirrorFiManBranches, FreezeFiManLayer)
FiBwBranchScript := stack(BwManBranch, ArrayManBranches, MirrorFiManBranches, FreezeFiManLayer)
FiManBranchScript := stack(FiBranchScript, FiBwBranchScript)
FiManifoldScript := stack(FiManWallScript, FiTrunkReceiverScript, FiManBranchScript)
# Entrance and Exit Boxes
LayerFiEntExitBox := layer_new("FiEntExitBoxCon", grey)
FiEntBox := Tank(FiEntranceBox_origin, FiEntranceBox_dim, T_PlantWall)
FiExitBox := Tank(FiExitBox_origin, FiExitBox_dim, T_PlantWall)
LayerFiEntExitBoxFrz := FreezeLayer("FiEntExitBoxCon")
# Overflow and Distribution Boxes
LayerFiOFDistBox := layer_new("FiOverflowDistBoxCon", grey)
FiDistBox_Dim = [0.5183; 0.28415; 1.13231] m
FiDistBox := Tank(FiDistBox_Origin, FiDistBox_Dim, T_PlantWall)
FiOverflowBox := Tank(FiOverflowBox_Origin, FiOverflowBox_Dim, T_PlantWall)
FiOverflowBoxBase :=
    if EN_DoubleTrain == 0
        BoxF(FiOverflowBox_Origin + [T_PlantWall; -T_PlantWall; -T_PlantWall], [
            FiOverflowBox_Origin[0] - FiOverflowBox_Dim[0];
            FiOverflowBox_Origin[1] + FiOverflowBox_Dim[1] + T_PlantWall;
            FiEntranceBox_origin[2] - T_PlantWall
        ], [0; 0; 0]*deg)
    otherwise
        BoxF(FiOverflowBox_Origin + [T_PlantWall; 0; -T_PlantWall], [
            FiOverflowBox_Origin[0] - FiOverflowBox_Dim[0] - T_PlantWall;
            FiOverflowBox_Origin[1] + FiOverflowBox_Dim[1] + T_PlantWall;
            FiEntranceBox_origin[2] - T_PlantWall
        ], [0; 0; 0]*deg)
LayerFiOFDistBoxFrz := FreezeLayer("FiOverflowDistBoxCon")
# Entrance Box Air Removal
FiAirRemovalBlockSlot :=
    if EN_DoubleTrain == 0
        BoxF([
            FiEntranceBox_origin[0] - S_FiEntranceBaffle - T_SedWeir - S_FiBaffleToBlock;
            FiEntranceBox_origin[1] - T_ConcreteMin;
            Z_FiAirRemovalBlockBottom
        ], [
            FiEntranceBox_origin[0] - S_FiEntranceBaffle - T_SedWeir - S_FiBaffleToBlock;
            FiEntranceBox_origin[1] + T_ConcreteMin;
            Z_FiEntranceBottom + H_FiEntrance
        ] + [-W_FiAirRemovalBlock; W_FiEntrance; 0], [0; 0; 0])
    otherwise
        BoxF([
            FiEntranceBox_origin[0] - T_ConcreteMin - W_FiEntrance;
            FiEntranceBox_origin[1] - S_FiEntranceBaffle - T_SedWeir - S_FiBaffleToBlock + L_FiEntrance;
            Z_FiAirRemovalBlockBottom
        ], [
            FiEntranceBox_origin[0] + T_ConcreteMin;
            FiEntranceBox_origin[1] - S_FiEntranceBaffle - T_SedWeir - S_FiBaffleToBlock + L_FiEntrance;
            Z_FiEntranceBottom + H_FiEntrance
        ] - [0; W_FiAirRemovalBlock; 0], [0; 0; 0])
FiBaffle :=
    BoxF([FiEntranceBox_origin[0]; FiEntranceBox_origin[1] - T_ConcreteMin; Z_FiEntranceBottom] + [-S_FiEntranceBaffle; 0; S_FiEntranceBaffle], [FiEntranceBox_origin[0]; FiEntranceBox_origin[1]; Z_FiEntranceBottom] + [-S_FiEntranceBaffle - T_SedWeir; W_FiEntrance + T_ConcreteMin; H_FiEntrance], [0; 0; 0]) if EN_DoubleTrain == 0
    otherwise
        BoxF([
            FiEntranceBox_origin[0] - T_ConcreteMin - W_FiEntrance;
            FiEntranceBox_origin[1] + L_FiEntrance;
            Z_FiEntranceBottom
        ] + [0 m; -S_FiEntranceBaffle; S_FiEntranceBaffle], [FiEntranceBox_origin[0]; FiEntranceBox_origin[1] + L_FiEntrance; Z_FiEntranceBottom] + [T_ConcreteMin; -S_FiEntranceBaffle - T_SedWeir; H_FiEntrance], [0; 0; 0])
FiSubtractBaffleEntSlots := SubtractF(["FiEntExitBoxCon"], "DeleteMe")
FiSubtractBaffleOverflowSlots := SubtractF(["FiOverflowDistBoxCon"], "DeleteMe")
ArrayFiBaffleSlots :=
    array_all(2, 1, -(W_FiEntrance + W_FiOverflow + 2*T_PlantWall)) if EN_DoubleTrain == 0
    array_all(1, 2, W_FiEntrance + W_FiOverflow + 2*T_ChannelWall) otherwise
FiBaffleSlots :=
    stack(FiAirRemovalBlockSlot, FiBaffle, GroupDelete, FiSubtractBaffleEntSlots, FiAirRemovalBlockSlot, FiBaffle, GroupDelete, FiSubtractBaffleOverflowSlots) if N_Fi == 1
    stack(FiAirRemovalBlockSlot, FiBaffle, GroupDelete, FiSubtractBaffleEntSlots, FiAirRemovalBlockSlot, FiBaffle, ArrayFiBaffleSlots, GroupDelete, FiSubtractBaffleOverflowSlots) otherwise
FiBaffleLayer := layer_new("FiBaffles", ltgrey)
FiAirRemovalBlock :=
    if EN_DoubleTrain == 0
        BoxF([
            FiEntranceBox_origin[0] - S_FiEntranceBaffle - T_SedWeir - S_FiBaffleToBlock;
            FiEntranceBox_origin[1] - T_ConcreteMin;
            Z_FiAirRemovalBlockBottom
        ], [
            FiEntranceBox_origin[0] - S_FiEntranceBaffle - 2*T_SedWeir - S_FiBaffleToBlock;
            FiEntranceBox_origin[1] + T_ConcreteMin + W_FiEntrance;
            Z_FiAirRemovalBlockTop
        ], [0; 0; 0])
    otherwise
        BoxF([
            FiEntranceBox_origin[0] - (T_ConcreteMin + W_FiEntrance);
            FiEntranceBox_origin[1] - S_FiEntranceBaffle - T_SedWeir - S_FiBaffleToBlock + L_FiEntrance;
            Z_FiAirRemovalBlockBottom
        ], [
            FiEntranceBox_origin[0] + T_ConcreteMin;
            FiEntranceBox_origin[1] - S_FiEntranceBaffle - 2*T_SedWeir - S_FiBaffleToBlock + L_FiEntrance;
            Z_FiAirRemovalBlockTop
        ], [0; 0; 0])
FiBaffleLayerFrz := FreezeLayer("FiBaffles")
FiBaffles := stack(FiBaffleLayer, FiBaffle, FiAirRemovalBlock, FiBaffleLayerFrz)
# Weir Control System at Plant Inlet. Not yet flexible for when EN.DoubleTrain is greater than 0
# Only stack into code if the N.Fi >=2 !
FiSubtractWeirInlet := SubtractF(["FiInletChannelCon"], "DeleteMe")
FiSubtractWeirEntExit := SubtractF(["FiEntExitBoxCon"], "DeleteMe")
FiSubtractWeirDist := SubtractF(["FiOverflowDistBoxCon"], "DeleteMe")
FiSubtractNarrowWeir := SubtractF(["FiInletControlWeir"], "DeleteMe")
MakeInletWeirSlotsLayer := layer_new("FiInletWeirSlots", grey)
MakeInletWeirLayer := layer_new("FiInletControlWeir", purple)
InletWeirFrz := FreezeLayer("FiInletControlWeir")
InletWeirSlotFrz := FreezeLayer("FiInletWeirSlots")
SelectInletWeirSlots := SelectLayer("FiInletWeirSlots")
# Case 1: Only 1 filter
FiEntranceWeirCut := BoxF([
    FiEntranceBox_origin[0];
    FiEntranceBox_origin[1] + FiEntranceBox_dim[1]/2 - L_FiEntranceWeir/2;
    Z_FiEntranceWeir
], [
    FiEntranceBox_origin[0] + T_PlantWall;
    FiEntranceBox_origin[1] + FiEntranceBox_dim[1]/2 + L_FiEntranceWeir/2;
    FiInletChannel_Origin[2] + H_FiInletChannel
], [0; 0; 0]*deg)
# Case 2: Two or More Filters
FiEntranceWeirSpace :=
    script ← BoxF([
        FiEntranceBox_origin[0];
        FiEntranceBox_origin[1] + FiEntranceBox_dim[1]/2 - L_FiEntranceWeir/2;
        FiInletChannel_Origin[2]
    ], [
        FiEntranceBox_origin[0] + T_PlantWall;
        FiEntranceBox_origin[1] + FiEntranceBox_dim[1]/2 + L_FiEntranceWeir/2;
        FiInletChannel_Origin[2] + H_FiInletChannel
    ], [0; 0; 0]*deg)
    i ← 2
    while i ≤ N_Fi
        next ← BoxF([
            FiEntranceBox_origin[0];
            FiEntranceBox_origin[1] + FiEntranceBox_dim[1]/2 - L_FiEntranceWeir/2 - (i - 1)*(W_Fi + T_FiWall);
            FiInletChannel_Origin[2]
        ], [
            FiEntranceBox_origin[0] + T_PlantWall;
            FiEntranceBox_origin[1] + FiEntranceBox_dim[1]/2 + L_FiEntranceWeir/2 - (i - 1)*(W_Fi + T_FiWall);
            FiInletChannel_Origin[2] + H_FiInletChannel
        ], [0; 0; 0]*deg)
        i ← i + 1
        script ← stack(script, next)
    return script
WeirSlot1 :=
    script ← BoxF([
        FiEntranceBox_origin[0];
        FiEntranceBox_origin[1] + FiEntranceBox_dim[1]/2 - L_FiEntranceWeir/2 - T_ConcreteMin;
        FiInletChannel_Origin[2]
    ], [
        FiEntranceBox_origin[0] + T_RemovableWeir;
        FiEntranceBox_origin[1] + FiEntranceBox_dim[1]/2 + L_FiEntranceWeir/2 + T_ConcreteMin;
        FiInletChannel_Origin[2] + H_FiInletChannel
    ], [0; 0; 0]*deg)
    i ← 2
    while i ≤ N_Fi
        next ← BoxF([
            FiEntranceBox_origin[0];
            FiEntranceBox_origin[1] + FiEntranceBox_dim[1]/2 - L_FiEntranceWeir/2 - T_ConcreteMin - (i - 1)*(W_Fi + T_FiWall);
            FiInletChannel_Origin[2]
        ], [
            FiEntranceBox_origin[0] + T_RemovableWeir;
            FiEntranceBox_origin[1] + FiEntranceBox_dim[1]/2 + L_FiEntranceWeir/2 + T_ConcreteMin - (i - 1)*(W_Fi + T_FiWall);
            FiInletChannel_Origin[2] + H_FiInletChannel
        ], [0; 0; 0]*deg)
        i ← i + 1
        script ← stack(script, next)
    return script
WeirSlot2 :=
    script ← BoxF([
        FiEntranceBox_origin[0] + T_PlantWall - T_ConcreteMin - T_RemovableWeir;
        FiEntranceBox_origin[1] + FiEntranceBox_dim[1]/2 - L_FiEntranceWeir/2 - T_ConcreteMin;
        FiInletChannel_Origin[2]
    ], [
        FiEntranceBox_origin[0] + T_PlantWall - T_ConcreteMin;
        FiEntranceBox_origin[1] + FiEntranceBox_dim[1]/2 + L_FiEntranceWeir/2 + T_ConcreteMin;
        FiInletChannel_Origin[2] + H_FiInletChannel
    ], [0; 0; 0]*deg)
    i ← 2
    while i ≤ N_Fi
        next ← BoxF([
            FiEntranceBox_origin[0] + T_PlantWall - T_ConcreteMin - T_RemovableWeir;
            FiEntranceBox_origin[1] + FiEntranceBox_dim[1]/2 - L_FiEntranceWeir/2 - T_ConcreteMin - (i - 1)*(W_Fi + T_FiWall);
            FiInletChannel_Origin[2]
        ], [
            FiEntranceBox_origin[0] + T_PlantWall - T_ConcreteMin;
            FiEntranceBox_origin[1] + FiEntranceBox_dim[1]/2 + L_FiEntranceWeir/2 + T_ConcreteMin - (i - 1)*(W_Fi + T_FiWall);
            FiInletChannel_Origin[2] + H_FiInletChannel
        ], [0; 0; 0]*deg)
        i ← i + 1
        script ← stack(script, next)
    return script
    = "_box -7.48073,2.57254,1.0803 -7.45573,3.5504,1.74641"
FiInletWeirHoles := stack(MakeInletWeirSlotsLayer, FiEntranceWeirSpace, WeirSlot1, WeirSlot2, GroupDelete, FiSubtractWeirInlet, FiEntranceWeirSpace, WeirSlot1, WeirSlot2, GroupDelete, FiSubtractWeirEntExit, FiEntranceWeirSpace, WeirSlot1, WeirSlot2, GroupDelete, FiSubtractWeirDist, InletWeirSlotFrz)
WideWeir1 := BoxF([
    FiEntranceBox_origin[0];
    FiEntranceBox_origin[1] + FiEntranceBox_dim[1]/2 - L_FiEntranceWeir/2 - T_ConcreteMin;
    FiInletChannel_Origin[2]
], [
    FiEntranceBox_origin[0] + T_RemovableWeir;
    FiEntranceBox_origin[1] + FiEntranceBox_dim[1]/2 + L_FiEntranceWeir/2 + T_ConcreteMin;
    FiInletChannel_Origin[2] + H_FiInletChannel
], [0; 0; 0]*deg)
WideWeir2 := BoxF([
    FiEntranceBox_origin[0] + T_PlantWall - T_ConcreteMin - T_RemovableWeir;
    FiEntranceBox_origin[1] + FiEntranceBox_dim[1]/2 - L_FiEntranceWeir/2 - T_ConcreteMin;
    FiInletChannel_Origin[2]
], [
    FiEntranceBox_origin[0] + T_PlantWall - T_ConcreteMin;
    FiEntranceBox_origin[1] + FiEntranceBox_dim[1]/2 + L_FiEntranceWeir/2 + T_ConcreteMin;
    Z_FiBwFlowControlWide
], [0; 0; 0]*deg)
FiInletWeirPieces := stack(MakeInletWeirLayer, WideWeir1, WideWeir2, InletWeirFrz)
NarrowWeir := BoxF([
    FiEntranceBox_origin[0];
    FiEntranceBox_origin[1] + FiEntranceBox_dim[1]/2 - W_FiBwFlowControl/2;
    Z_FiBwFlowControlSlot
], [
    FiEntranceBox_origin[0] + T_RemovableWeir;
    FiEntranceBox_origin[1] + FiEntranceBox_dim[1]/2 + W_FiBwFlowControl/2;
    FiInletChannel_Origin[2] + H_FiInletChannel
], [0; 0; 0]*deg)
FiInletWeirNarrowScript := stack(SelectInletWeirSlots, NarrowWeir, GroupDelete, FiSubtractNarrowWeir, InletWeirSlotFrz)
FiInletWeirSystemScript := stack(FiInletWeirHoles, FiInletWeirPieces, FiInletWeirNarrowScript)
FiInletWeirScript :=
    FiInletWeirSystemScript if N_Fi ≥ 2
    stack(MakeInletWeirSlotsLayer, FiEntranceWeirCut, GroupDelete, FiSubtractWeirInlet, FiEntranceWeirCut, GroupDelete, FiSubtractWeirEntExit, FiEntranceWeirCut, GroupDelete, FiSubtractWeirDist, InletWeirSlotFrz) otherwise
FiAuxBoxScript := stack(LayerFiEntExitBox, FiEntBox, FiExitBox, Union_All, LayerFiEntExitBoxFrz, LayerFiOFDistBox, FiDistBox, FiOverflowBox, FiOverflowBoxBase, LayerFiOFDistBoxFrz, FiBaffleSlots, FiBaffles, FiInletWeirScript)
# Auxiliary Box Concrete
# Auxiliary Box Plumbing (not filter entrance or exit)
Z_FiOverflowVertDrainPipeStart := Z_FiOverflowBottom - CouplingLength(ND_FiEntOverflow) + SocketDepth(ND_FiEntOverflow) = 1.28979 m
Z_FiOverflowVertDrainPipeEnd := Z_FiOverflowBottom - H_FiEntOverflowDrop + ElbowRadius(ND_FiEntOverflow) = 0.424727 m
X_FiOverflowHorizDrainPipeStart := FiInletChannel_Origin[0] + T_PlantWall - CouplingLength(ND_FiEntOverflow) + SocketDepth(ND_FiEntOverflow)
X_FiOverflowHorizDrainPipeEnd := FiEntranceBox_origin[0] - L_FiEntrance/2 + ElbowRadius(ND_FiEntOverflow)
Y_FiOverflowHorizDrainPipeStart := FiInletChannel_Origin[1] + W_FiInletChannel + T_PlantWall - CouplingLength(ND_FiEntOverflow) + SocketDepth(ND_FiEntOverflow)
Y_FiOverflowHorizDrainPipeEnd := FiEntranceBox_origin[1] + L_FiEntrance/2 + ElbowRadius(ND_FiEntOverflow)
# Auxiliary Fittings
FiAuxFittingLayer := layer_new("FiAuxFittingPlu", green)
FiAuxRemovableLayer := layer_new("FiAuxRemovablePlu", red)
SelectFiAuxRemovables := SelectLayer("FiAuxRemovablePlu")
FiBypassCoupling :=
    if EN_DoubleTrain == 0
        CouplingSUBF([
            FiExitBox_origin[0] + CouplingLength(ND_FiBypass) - SocketDepth(ND_FiBypass);
            FiEntranceBox_origin[1] - T_ChannelWall - W_FiOverflow/2;
            Z_FiTop - S_Fitting - ConRadius(ND_FiBypass)
        ], [0; 0]*deg, ND_FiBypass, PS_Default, ["FiOverflowDistBoxCon"])
    otherwise
        CouplingSUBF([
            FiEntranceBox_origin[0] + T_ChannelWall + W_FiOverflow/2;
            FiExitBox_origin[1] + CouplingLength(ND_FiBypass) - SocketDepth(ND_FiBypass) + L_FiExit;
            Z_FiTop - S_Fitting - ConRadius(ND_FiBypass)
        ], [90; 0]*deg, ND_FiBypass, PS_Default, ["FiOverflowDistBoxCon"])
FiBypassCap :=
    if EN_DoubleTrain == 0
        CapF([
            FiExitBox_origin[0] + CouplingLength(ND_FiBypass) + CapHeight(ND_FiBypass) - CapThickness(ND_FiBypass);
            FiEntranceBox_origin[1] - T_ChannelWall - W_FiOverflow/2;
            Z_FiTop - S_Fitting - ConRadius(ND_FiBypass)
        ], [0; 0; 0]*deg, ND_FiBypass)
    otherwise
        CapF([
            FiEntranceBox_origin[0] + T_ChannelWall + W_FiOverflow/2;
            FiExitBox_origin[1] + CouplingLength(ND_FiBypass) + CapHeight(ND_FiBypass) - CapThickness(ND_FiBypass) + L_FiExit;
            Z_FiTop - S_Fitting - ConRadius(ND_FiBypass)
        ], [90; 0; 0]*deg, ND_FiBypass)
FiOverflowBoxCoupling :=
    if EN_DoubleTrain == 0
        CouplingSUBF([
            FiEntranceBox_origin[0] - L_FiEntrance/2;
            FiEntranceBox_origin[1] - T_ChannelWall - W_FiOverflow/2;
            Z_FiOverflowVertDrainPipeStart
        ], [0; 90]*deg, ND_FiEntOverflow, PS_Default, ["FiOverflowDistBoxCon"])
    otherwise
        CouplingSUBF([
            FiEntranceBox_origin[0] + T_ChannelWall + W_FiOverflow/2;
            FiEntranceBox_origin[1] + L_FiEntrance/2;
            Z_FiOverflowVertDrainPipeStart
        ], [0; 90]*deg, ND_FiEntOverflow, PS_Default, ["FiOverflowDistBoxCon"])
FiAuxFittingFrz := FreezeLayer("FiAuxFittingPlu")
FiAuxRemovableFrz := FreezeLayer("FiAuxRemovablePlu")
FiAuxFittingScript := stack(FiAuxFittingLayer, FiBypassCoupling, FiOverflowBoxCoupling, FiAuxFittingFrz, FiAuxRemovableLayer, FiBypassCap, FiAuxRemovableFrz)
# Distribution Plumbing Start
FiDistFittingLayer := layer_new("FiDistFittingPlu", green)
FiDistCoupling :=
    if EN_DoubleTrain == 0
        CouplingSUBF([
            FiExitBox_origin[0] - L_FiExit/2;
            FiEntranceBox_origin[1] - T_ChannelWall - W_FiOverflow/2;
            Z_FiExitBottom - SocketDepth(ND_DistPipe)
        ], [0; 270]*deg, ND_DistPipe, PS_Default, ["FiOverflowDistBoxCon"])
    otherwise
        CouplingSUBF([
            FiEntranceBox_origin[0] + T_ChannelWall + W_FiOverflow/2;
            FiExitBox_origin[1] + L_FiExit/2;
            Z_FiExitBottom - SocketDepth(ND_DistPipe)
        ], [0; 270]*deg, ND_DistPipe, PS_Default, ["FiOverflowDistBoxCon"])
FiDistElbow1 :=
    if EN_DoubleTrain == 0
        ElbowF([
            FiExitBox_origin[0] - L_FiExit/2;
            FiEntranceBox_origin[1] - T_ChannelWall - W_FiOverflow/2;
            Z_FiDistPipe + ElbowRadius(ND_DistPipe)
        ], [0; 0; 270]*deg, ND_DistPipe, PS_Default)
    otherwise
        ElbowF([
            FiEntranceBox_origin[0] + T_ChannelWall + W_FiOverflow/2;
            FiExitBox_origin[1] + L_FiExit/2;
            Z_FiDistPipe + ElbowRadius(ND_DistPipe)
        ], [0; -90; 270]*deg, ND_DistPipe, PS_Default)
FiDistFittingFrz := FreezeLayer("FiDistFittingPlu")
FiDistPipeLayer := layer_new("FiDistPipePlu", blue)
L_FiDistPipe1 := Z_FiExitBottom - CouplingLength(ND_DistPipe) + SocketDepth(ND_DistPipe) - (Z_FiDistPipe + ElbowRadius(ND_DistPipe))
FiDistPipe1 :=
    if EN_DoubleTrain == 0
        PipeSUBF([
            FiExitBox_origin[0] - L_FiExit/2;
            FiEntranceBox_origin[1] - T_ChannelWall - W_FiOverflow/2;
            Z_FiExitBottom - CouplingLength(ND_DistPipe) + SocketDepth(ND_DistPipe)
        ], L_FiDistPipe1, [0; 270; 0]*deg, ND_DistPipe, PS_Default, ["FiOverflowDistBoxCon"])
    otherwise
        PipeSUBF([
            FiEntranceBox_origin[0] + T_ChannelWall + W_FiOverflow/2;
            FiExitBox_origin[1] + L_FiExit/2;
            Z_FiExitBottom - CouplingLength(ND_DistPipe) + SocketDepth(ND_DistPipe)
        ], L_FiDistPipe1, [0; 270; 0]*deg, ND_DistPipe, PS_Default, ["FiOverflowDistBoxCon"])
FiDistPipeFrz := FreezeLayer("FiDistPipePlu")
FiDistStartScript := stack(FiDistFittingLayer, FiDistCoupling, FiDistElbow1, FiDistFittingFrz, FiDistPipeLayer, FiDistPipe1, FiDistPipeFrz)
# Auxiliary Pipes
FiAuxPipeLayer := layer_new("FiAuxPipePlu", blue)
FiBypassPipe1Horiz :=
    if EN_DoubleTrain == 0
        PipeF([
            FiExitBox_origin[0] + CouplingLength(ND_FiBypass) + CapHeight(ND_FiBypass) - CapThickness(ND_FiBypass);
            FiEntranceBox_origin[1] - T_ChannelWall - W_FiOverflow/2;
            Z_FiTop - S_Fitting - ConRadius(ND_FiBypass)
        ], CapHeight(ND_FiBypass) - CapThickness(ND_FiBypass) + SocketDepth(ND_FiBypass), [0; 0; 0]*deg, ND_FiBypass, PS_Default)
    otherwise
        PipeF([
            FiEntranceBox_origin[0] + T_ChannelWall + W_FiOverflow/2;
            FiExitBox_origin[1] + CouplingLength(ND_FiBypass) + CapHeight(ND_FiBypass) - CapThickness(ND_FiBypass) + L_FiExit;
            Z_FiTop - S_Fitting - ConRadius(ND_FiBypass)
        ], CapHeight(ND_FiBypass) - CapThickness(ND_FiBypass) + SocketDepth(ND_FiBypass), [90; 0; 0]*deg, ND_FiBypass, PS_Default)
FiOverflowDrainPipeVert :=
    if EN_DoubleTrain == 0
        PipeSUBF([
            FiEntranceBox_origin[0] - L_FiEntrance/2;
            FiEntranceBox_origin[1] - T_ChannelWall - W_FiOverflow/2;
            Z_FiOverflowVertDrainPipeStart
        ], Z_FiOverflowVertDrainPipeStart - Z_FiOverflowVertDrainPipeEnd, [0; 270]*deg, ND_FiEntOverflow, PS_Default, ["FiOverflowDistBoxCon"])
    otherwise
        PipeSUBF([
            FiEntranceBox_origin[0] + T_ChannelWall + W_FiOverflow/2;
            FiEntranceBox_origin[1] + L_FiEntrance/2;
            Z_FiOverflowVertDrainPipeStart
        ], Z_FiOverflowVertDrainPipeStart - Z_FiOverflowVertDrainPipeEnd, [0; 270]*deg, ND_FiEntOverflow, PS_Default, ["FiOverflowDistBoxCon"])
LayerFiAuxPipeFrz := FreezeLayer("FiAuxPipePlu")
FiAuxPipeScript := stack(FiAuxPipeLayer, FiOverflowDrainPipeVert, LayerFiAuxPipeFrz, SelectFiAuxRemovables, FiBypassPipe1Horiz, FiAuxRemovableFrz)
FiAuxPlumbingScript := stack(FiAuxFittingScript, FiDistStartScript, FiAuxPipeScript)
# Entrance and Exit Plumbing Until Filter Wall Coupling
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# This is all of the piping between filter box, entrance and exit
# In means the pipe goes IN TO THE FILTER
# Out means it comes OUT OF THE FILTER
FiEntExitPipeLayer := layer_new("FiEntExitPipesPlu", blue)
FiEntExitFittingLayer := layer_new("FiEntExitFittingsPlu", green)
FiEntExitPipeFrz := FreezeLayer("FiEntExitPipesPlu")
FiEntExitFittingFrz := FreezeLayer("FiEntExitFittingsPlu")
# so it all fits!
AN_FiTrunkValves := 25 deg
# Inlet 0 Pipes (backwash)
Z_FiInPipe0aStart := FiEntranceBox_origin[2] - CouplingLength(ND_FiBwTrunk) + SocketDepth(ND_FiBwTrunk)
Z_FiInPipe0aEnd := Fi_origin[2] + outerradius(ND_FiBwManBranch) + ShortTeeLength(ND_FiBwTrunk)
L_FiInPipe0a := FiBwInletCoupling_origin[2] - Z_FiInPipe0aEnd = 3.05186 m
FiInPipe0a := PipeSUBF(FiBwInletCoupling_origin, L_FiInPipe0a, [0; 270]*deg, ND_FiBwTrunk, PS_Default, ["FiEntExitBoxCon"])
X_FiBwTrunkPipeEnd :=
    (Fi_origin[0] + T_FiWall + CouplingLength(ND_FiBwTrunk) - SocketDepth(ND_FiBwTrunk)) if EN_DoubleTrain == 0
    (Fi_origin[1] + L_Fi + T_FiWall + CouplingLength(ND_FiBwTrunk) - SocketDepth(ND_FiBwTrunk)) otherwise
L_FiInPipe0b :=
    (FiBwInletCoupling_origin[0] - TeeLength(ND_FiBwTrunk)/2 - X_FiBwTrunkPipeEnd) if EN_DoubleTrain == 0
    (FiBwInletCoupling_origin[1] - TeeLength(ND_FiBwTrunk)/2 - X_FiBwTrunkPipeEnd) otherwise
    = 1.90416 m
FiInPipe0b :=
    if EN_DoubleTrain == 0
        PipeF([
            FiBwInletCoupling_origin[0] - ShortTeeLength(ND_FiBwTrunk);
            FiBwInletCoupling_origin[1];
            Z_FiInPipe0aEnd - ShortTeeLength(ND_FiBwTrunk)
        ], L_FiInPipe0b, [0; 0]*deg, ND_FiBwTrunk, PS_Default)
    otherwise
        PipeF([
            FiBwInletCoupling_origin[0];
            FiBwInletCoupling_origin[1] - ShortTeeLength(ND_FiBwTrunk);
            Z_FiInPipe0aEnd - ShortTeeLength(ND_FiBwTrunk)
        ], L_FiInPipe0b, [90; 0]*deg, ND_FiBwTrunk, PS_Default)
FiIn0PipeScript := stack(FiEntExitPipeLayer, FiInPipe0a, FiInPipe0b, FiEntExitPipeFrz)
# Inlet 0 Fittings (backwash)
FiEntBoxCoupling0 := CouplingSUBF(FiBwInletCoupling_origin, [0; 90]*deg, ND_FiBwTrunk, PS_Default, ["FiEntExitBoxCon"])
FiInTee0a := TeeF([FiBwInletCoupling_origin[0]; FiBwInletCoupling_origin[1]; Z_FiInPipe0aEnd], [
    0;
    {
        0 if EN_DoubleTrain == 0
        90 otherwise
    };
    90
]*deg, ND_FiBwTrunk, PS_Default)
FiInReducerLarge :=
    if EN_DoubleTrain == 0
        CylinderF([
            FiBwInletCoupling_origin[0] + ShortTeeLength(ND_FiBwTrunk) + 10 cm;
            FiBwInletCoupling_origin[1];
            Z_FiInPipe0aEnd - ShortTeeLength(ND_FiBwTrunk)
        ], innerdiameter(ND_FiBwTrunk, PS_Default)/2, 10 cm, [0; 0]*deg)
    otherwise
        CylinderF([
            FiBwInletCoupling_origin[0];
            FiBwInletCoupling_origin[1] + ShortTeeLength(ND_FiBwTrunk) + 10 cm;
            Z_FiInPipe0aEnd - ShortTeeLength(ND_FiBwTrunk)
        ], innerdiameter(ND_FiBwTrunk, PS_Default)/2, 10 cm, [90; 0]*deg)
FiInReducerSmall :=
    if EN_DoubleTrain == 0
        CylinderF([
            FiBwInletCoupling_origin[0] + ShortTeeLength(ND_FiBwTrunk) + 2*10*cm;
            FiBwInletCoupling_origin[1];
            Z_FiInPipe0aEnd - ShortTeeLength(ND_FiBwTrunk)
        ], innerdiameter(3 in, PS_Default)/2, 10 cm, [0; 0]*deg)
    otherwise
        CylinderF([
            FiBwInletCoupling_origin[0];
            FiBwInletCoupling_origin[1] + ShortTeeLength(ND_FiBwTrunk) + 2*10*cm;
            Z_FiInPipe0aEnd - ShortTeeLength(ND_FiBwTrunk)
        ], innerdiameter(3 in, PS_Default)/2, 10 cm, [90; 0]*deg)
FiValveLayer := layer_new("FiValvePlu", blue3)
# The valve length and socket functions are not returning the correct numbers, so for now, I am arbitrarily setting the valve over by 60% of its length as returned by the function
FiInValve :=
    if EN_DoubleTrain == 0
        insertdwg("https://confluence.cornell.edu/download/attachments/173604905/Fi-Scaled-Gate-Valve-Threaded.dwg", [
            FiBwInletCoupling_origin[0] + ShortTeeLength(ND_FiBwTrunk) + 2*10*cm + 0.6*ValveLength(3 in);
            FiBwInletCoupling_origin[1];
            Z_FiInPipe0aEnd - ShortTeeLength(ND_FiBwTrunk)
        ], 3 in/(1.16 m), 3 in/(1.16 m), 0 deg)
    otherwise
        insertdwg("https://confluence.cornell.edu/download/attachments/173604905/Fi-Scaled-Gate-Valve-Threaded.dwg", [
            FiBwInletCoupling_origin[0];
            FiBwInletCoupling_origin[1] + ShortTeeLength(ND_FiBwTrunk) + 2*10*cm + 0.6*ValveLength(3 in);
            Z_FiInPipe0aEnd - ShortTeeLength(ND_FiBwTrunk)
        ], 3 in/(1.16 m), 3 in/(1.16 m), 90 deg)
LayerFiValveFrz := FreezeLayer("FiValvePlu")
FiIn0FittingScript := stack(FiEntExitFittingLayer, FiEntBoxCoupling0, FiInTee0a, FiInReducerLarge, FiInReducerSmall, FiEntExitFittingFrz, FiValveLayer, FiInValve, LayerFiValveFrz)
# here | here
# Inlet 1 Pipes
Z_FiInPipe1aEnd := Fi_origin[2] + outerradius(ND_FiBwManBranch) + H_FiBottomLayer + H_FiLayer + ElbowRadius(ND_FiTrunk)
L_FiInPipe1a := FiInletCoupling1_origin[2] - Z_FiInPipe1aEnd
FiInPipe1a := PipeSUBF(FiInletCoupling1_origin, L_FiInPipe1a, [0; 270]*deg, ND_FiTrunk, PS_Default, ["FiEntExitBoxCon"])
X_FiTrunkPipeEnd :=
    (Fi_origin[0] + T_FiWall + CouplingLength(ND_FiTrunk) - SocketDepth(ND_FiTrunk)) if EN_DoubleTrain == 0
    (Fi_origin[1] + L_Fi + T_FiWall + CouplingLength(ND_FiTrunk) - SocketDepth(ND_FiTrunk)) otherwise
X_FiTrunkPipeEnd = -10.2102 m
FiInletCoupling1_origin[0] - ElbowRadius(ND_FiTrunk) = -8.42534 m
L_FiInPipe1b == FiInletCoupling1_origin[0] - ElbowRadius(ND_FiTrunk) - X_FiTrunkPipeEnd
L_FiInPipe1b := FiInletCoupling1_origin[0] - ElbowRadius(ND_FiTrunk) - X_FiTrunkPipeEnd - TeeLength(ND_FiTrunk) - 2*SocketDepth(ND_FiTrunk)
L_FiInPipe1c := 2*SocketDepth(ND_FiTrunk)
FiInPipe1b :=
    if EN_DoubleTrain == 0
        PipeF([
            FiInletCoupling1_origin[0] - ElbowRadius(ND_FiTrunk);
            FiBwInletCoupling_origin[1];
            Z_FiInPipe1aEnd - ElbowRadius(ND_FiTrunk)
        ], L_FiInPipe1b, [0; 0]*deg, ND_FiTrunk, PS_Default)
    otherwise
        PipeF([
            FiInletCoupling1_origin[0];
            FiInletCoupling1_origin[1] - ElbowRadius(ND_FiTrunk);
            Z_FiInPipe1aEnd - ElbowRadius(ND_FiTrunk)
        ], L_FiInPipe1b, [90; 0]*deg, ND_FiTrunk, PS_Default)
FiInPipe1c :=
    if EN_DoubleTrain == 0
        PipeF([
            FiInletCoupling1_origin[0] - ElbowRadius(ND_FiTrunk) - L_FiInPipe1b - TeeLength(ND_FiTrunk);
            FiBwInletCoupling_origin[1];
            Z_FiInPipe1aEnd - ElbowRadius(ND_FiTrunk)
        ], L_FiInPipe1c, [0; 0]*deg, ND_FiTrunk, PS_Default)
    otherwise
        PipeF([
            FiInletCoupling1_origin[0];
            FiInletCoupling1_origin[1] - ElbowRadius(ND_FiTrunk) - L_FiInPipe1b - TeeLength(ND_FiTrunk);
            Z_FiInPipe1aEnd - ElbowRadius(ND_FiTrunk)
        ], L_FiInPipe1c, [90; 0]*deg, ND_FiTrunk, PS_Default)
FiEntExitPipesSelect := SelectLayer("FiEntExitPipesPlu")
FiIn1PipeScript := stack(FiEntExitPipesSelect, FiInPipe1a, FiInPipe1b, FiInPipe1c)
# here | not here
# Inlet 1 Fittings
FiEntBoxCoupling1 := CouplingSUBF(FiInletCoupling1_origin, [0; 90]*deg, ND_FiTrunk, PS_Default, ["FiEntExitBoxCon"])
FiInElbow1a :=
    ElbowF([FiInletCoupling1_origin[0]; FiInletCoupling1_origin[1]; Z_FiInPipe1aEnd], [0; 0; -90]*deg, ND_FiTrunk, PS_Default) if EN_DoubleTrain == 0
    ElbowF([FiInletCoupling1_origin[0]; FiInletCoupling1_origin[1]; Z_FiInPipe1aEnd], [0; -90; -90]*deg, ND_FiTrunk, PS_Default) otherwise
FiInTee1a :=
    if EN_DoubleTrain == 0
        TeeF([
            FiInletCoupling1_origin[0] - ElbowRadius(ND_FiTrunk) - L_FiInPipe1b - TeeLength(ND_FiTrunk)/2;
            FiInletCoupling1_origin[1] + ShortTeeLength(ND_FiTrunk)*cos(AN_FiTrunkValves);
            Z_FiInPipe1aEnd - ShortTeeLength(ND_FiTrunk)*sin(AN_FiTrunkValves) - ElbowRadius(ND_FiTrunk)
        ], [0 deg; 0 deg; -AN_FiTrunkValves], ND_FiTrunk, PS_Default)
    otherwise
        TeeF([
            FiInletCoupling1_origin[0] + ShortTeeLength(ND_FiTrunk)*cos(AN_FiTrunkValves);
            FiInletCoupling1_origin[1] - ElbowRadius(ND_FiTrunk) - L_FiInPipe1b - TeeLength(ND_FiTrunk)/2;
            Z_FiInPipe1aEnd - ShortTeeLength(ND_FiTrunk)*sin(AN_FiTrunkValves) - ElbowRadius(ND_FiTrunk)
        ], [90 deg; -AN_FiTrunkValves; 0 deg], ND_FiTrunk, PS_Default)
FiEntExitFittingSelect := SelectLayer("FiEntExitFittingsPlu")
FiIn1FittingScript := stack(FiEntExitFittingSelect, FiEntBoxCoupling1, FiInElbow1a, FiInTee1a)
# here | NOT here! | frozen later.
# Inlet 1 Valve
FiSmallPipeLayer := layer_new("FiEntExitSmallPipe", blue)
FiInSmallPipe1 :=
    if EN_DoubleTrain == 0
        PipeF([
            FiInletCoupling1_origin[0] - ElbowRadius(ND_FiTrunk) - L_FiInPipe1b - TeeLength(ND_FiTrunk)/2;
            FiInletCoupling1_origin[1] + ShortTeeLength(ND_FiTrunk)*cos(AN_FiTrunkValves);
            Z_FiInPipe1aEnd - ShortTeeLength(ND_FiTrunk)*sin(AN_FiTrunkValves) - ElbowRadius(ND_FiTrunk)
        ], 2*SocketDepth(ND_FiTrunk), [-90 deg; 0 deg; 0 deg], ND_FiTrunk, PS_Default)
    otherwise
        PipeF([
            FiInletCoupling1_origin[0] + ShortTeeLength(ND_FiTrunk)*cos(AN_FiTrunkValves);
            FiInletCoupling1_origin[1] - ElbowRadius(ND_FiTrunk) - L_FiInPipe1b - TeeLength(ND_FiTrunk)/2;
            Z_FiInPipe1aEnd - ShortTeeLength(ND_FiTrunk)*sin(AN_FiTrunkValves) - ElbowRadius(ND_FiTrunk)
        ], 2*SocketDepth(ND_FiTrunk), [0 deg; 0 deg; 0 deg], ND_FiTrunk, PS_Default)
(ShortTeeLength(ND_FiTrunk) + 2*SocketDepth(ND_FiTrunk))
FiIn1SmallPipeRotate :=
    if EN_DoubleTrain == 0
        Rotate3DLast([
            FiInletCoupling1_origin[0] - ElbowRadius(ND_FiTrunk) - L_FiInPipe1b - TeeLength(ND_FiTrunk)/2;
            FiInletCoupling1_origin[1] + ShortTeeLength(ND_FiTrunk)*cos(AN_FiTrunkValves);
            Z_FiInPipe1aEnd - ShortTeeLength(ND_FiTrunk)*sin(AN_FiTrunkValves) - ElbowRadius(ND_FiTrunk)
        ], "x", -AN_FiTrunkValves)
    otherwise
        Rotate3DLast([
            FiInletCoupling1_origin[0] + ShortTeeLength(ND_FiTrunk)*cos(AN_FiTrunkValves);
            FiInletCoupling1_origin[1] - ElbowRadius(ND_FiTrunk) - L_FiInPipe1b - TeeLength(ND_FiTrunk)/2;
            Z_FiInPipe1aEnd - ShortTeeLength(ND_FiTrunk)*sin(AN_FiTrunkValves) - ElbowRadius(ND_FiTrunk)
        ], "y", -AN_FiTrunkValves)
FiSmallPipeFrz := FreezeLayer("FiEntExitSmallPipe")
FiEntExitValveLayer := layer_new("FiEntExitValve", black)
tiny := .001 m
Test := 25
ND_FiTrunkValve := 2 in
BlockHelp := BoxF({
    [
        FiInletCoupling1_origin[0] - ElbowRadius(ND_FiTrunk) - L_FiInPipe1b - TeeLength(ND_FiTrunk)/2;
        FiInletCoupling1_origin[1] + (ShortTeeLength(ND_FiTrunk) + 2*SocketDepth(ND_FiTrunk))*cos(AN_FiTrunkValves);
        Z_FiInPipe1aEnd - ShortTeeLength(ND_FiTrunk)*sin(AN_FiTrunkValves) - ElbowRadius(ND_FiTrunk)
    ]
    [
        FiInletCoupling1_origin[0] + (ShortTeeLength(ND_FiTrunk) + 2*SocketDepth(ND_FiTrunk))*cos(AN_FiTrunkValves);
        FiInletCoupling1_origin[1] - ElbowRadius(ND_FiTrunk) - L_FiInPipe1b - TeeLength(ND_FiTrunk)/2;
        Z_FiInPipe1aEnd - ShortTeeLength(ND_FiTrunk)*sin(AN_FiTrunkValves) - ElbowRadius(ND_FiTrunk)
    ]
}, {
    [
        FiInletCoupling1_origin[0] - ElbowRadius(ND_FiTrunk) - L_FiInPipe1b - TeeLength(ND_FiTrunk)/2 + tiny;
        FiInletCoupling1_origin[1] + (ShortTeeLength(ND_FiTrunk) + 2*SocketDepth(ND_FiTrunk))*cos(AN_FiTrunkValves) + tiny;
        Z_FiInPipe1aEnd - ShortTeeLength(ND_FiTrunk)*sin(AN_FiTrunkValves) - ElbowRadius(ND_FiTrunk) + tiny
    ]
    [
        FiInletCoupling1_origin[0] + (ShortTeeLength(ND_FiTrunk) + 2*SocketDepth(ND_FiTrunk))*cos(AN_FiTrunkValves) + tiny;
        FiInletCoupling1_origin[1] - ElbowRadius(ND_FiTrunk) - L_FiInPipe1b - TeeLength(ND_FiTrunk)/2 + tiny;
        Z_FiInPipe1aEnd - ShortTeeLength(ND_FiTrunk)*sin(AN_FiTrunkValves) - ElbowRadius(ND_FiTrunk) + tiny
    ]
}, [0; 0; 0]*deg)
FiInValve1 :=
    if EN_DoubleTrain == 0
        insertdwg("https://confluence.cornell.edu/download/attachments/173604905/Sed-Scaled-Gate-Valve-Threaded.dwg", [
            FiInletCoupling1_origin[0] - ElbowRadius(ND_FiTrunk) - L_FiInPipe1b - TeeLength(ND_FiTrunk)/2;
            FiInletCoupling1_origin[1] + (ShortTeeLength(ND_FiTrunk) + 2*SocketDepth(ND_FiTrunk))*cos(AN_FiTrunkValves);
            Z_FiInPipe1aEnd - (ShortTeeLength(ND_FiTrunk) + 2*SocketDepth(ND_FiTrunk))*sin(AN_FiTrunkValves) - ElbowRadius(ND_FiTrunk)
        ], 2*outerradius(ND_FiTrunk)/(1.16 m), 2*outerradius(ND_FiTrunk)/(1.16 m), -90 deg)
    otherwise
        insertdwg("https://confluence.cornell.edu/download/attachments/173604905/Sed-Scaled-Gate-Valve-Threaded.dwg", [
            FiInletCoupling1_origin[0] + (ShortTeeLength(ND_FiTrunk) + 2*SocketDepth(ND_FiTrunk))*cos(AN_FiTrunkValves);
            FiInletCoupling1_origin[1] - ElbowRadius(ND_FiTrunk) - L_FiInPipe1b - TeeLength(ND_FiTrunk)/2;
            Z_FiInPipe1aEnd - (ShortTeeLength(ND_FiTrunk) + 2*SocketDepth(ND_FiTrunk))*sin(AN_FiTrunkValves) - ElbowRadius(ND_FiTrunk)
        ], 2*outerradius(ND_FiTrunk)/(1.16 m), 2*outerradius(ND_FiTrunk)/(1.16 m), 0 deg)
FiIn1ValveRotate :=
    if EN_DoubleTrain == 0
        Rotate3DLast([
            FiInletCoupling1_origin[0] - ElbowRadius(ND_FiTrunk) - L_FiInPipe1b - TeeLength(ND_FiTrunk)/2;
            FiInletCoupling1_origin[1] + (ShortTeeLength(ND_FiTrunk) + 2*SocketDepth(ND_FiTrunk))*cos(AN_FiTrunkValves);
            Z_FiInPipe1aEnd - ShortTeeLength(ND_FiTrunk)*sin(AN_FiTrunkValves) - ElbowRadius(ND_FiTrunk)
        ], "x", -AN_FiTrunkValves)
    otherwise
        Rotate3DLast([
            FiInletCoupling1_origin[0] + (ShortTeeLength(ND_FiTrunk) + 2*SocketDepth(ND_FiTrunk))*cos(AN_FiTrunkValves);
            FiInletCoupling1_origin[1] - ElbowRadius(ND_FiTrunk) - L_FiInPipe1b - TeeLength(ND_FiTrunk)/2;
            Z_FiInPipe1aEnd - ShortTeeLength(ND_FiTrunk)*sin(AN_FiTrunkValves) - ElbowRadius(ND_FiTrunk)
        ], "y", -AN_FiTrunkValves)
FiEntExitValveFrz := FreezeLayer("FiEntExitValve")
FiSmallPipeScript := stack(FiSmallPipeLayer, FiInSmallPipe1, FiIn1SmallPipeRotate)
FiValveScript := stack(FiEntExitValveLayer, BlockHelp, FiInValve1, FiIn1ValveRotate)
# Inlet 2 Pipes
Z_FiInPipe2aEnd := Z_FiInPipe1aEnd + 2*H_FiLayer
Y_FiInPipe2bEnd := FiExitCoupling1_origin[1] - ConRadius(ND_FiTrunk) - T_ConcreteMin
X_FiInPipe2bEnd :=
    (FiExitCoupling1_origin[0] - ConRadius(ND_FiTrunk) - T_ConcreteMin) if EN_DoubleTrain == 0
    (FiExitCoupling1_origin[1] - ConRadius(ND_FiTrunk) - T_ConcreteMin) otherwise  # Gives 5 cm of clearance plus the elbow radius
L_FiInPipe2a := FiInletCoupling2_origin[2] - Z_FiInPipe2aEnd
L_FiInPipe2b :=
    (FiInletCoupling2_origin[0] - ElbowRadius(ND_FiTrunk) - X_FiInPipe2bEnd) if EN_DoubleTrain == 0
    (FiInletCoupling2_origin[1] - ElbowRadius(ND_FiTrunk) - Y_FiInPipe2bEnd) otherwise
FiInPipe2a := PipeSUBF(FiInletCoupling2_origin, L_FiInPipe2a, [0; 270]*deg, ND_FiTrunk, PS_Default, ["FiEntExitBoxCon"])
FiInPipe2b :=
    if EN_DoubleTrain == 0
        PipeF([
            FiInletCoupling2_origin[0] - ElbowRadius(ND_FiTrunk);
            FiInletCoupling2_origin[1];
            Z_FiInPipe2aEnd - ElbowRadius(ND_FiTrunk)
        ], L_FiInPipe2b, [0; 0]*deg, ND_FiTrunk, PS_Default)
    otherwise
        PipeF([
            FiInletCoupling2_origin[0];
            FiInletCoupling2_origin[1] - ElbowRadius(ND_FiTrunk);
            Z_FiInPipe2aEnd - ElbowRadius(ND_FiTrunk)
        ], L_FiInPipe2b, [90; 0]*deg, ND_FiTrunk, PS_Default)
Y_FiInPipe2cEnd := Fi_origin[1] + W_Fi/2 - ElbowRadius(ND_FiTrunk)
X_FiInPipe2cEnd := Fi_origin[0] - W_Fi/2 + ElbowRadius(ND_FiTrunk)
L_FiInPipe2c :=
    (Y_FiInPipe2cEnd - (FiInletCoupling2_origin[1] + ElbowRadius(ND_FiTrunk))) if EN_DoubleTrain == 0
    (X_FiInPipe2cEnd - (FiInletCoupling2_origin[0] - ElbowRadius(ND_FiTrunk))) otherwise
L_FiInPipe2d == {
    (X_FiInPipe2bEnd - 2*ElbowRadius(ND_FiTrunk) - X_FiTrunkPipeEnd) if EN_DoubleTrain == 0
    (Y_FiInPipe2bEnd - 2*ElbowRadius(ND_FiTrunk) - X_FiTrunkPipeEnd) otherwise
}
L_FiInPipe2d :=
    (X_FiInPipe2bEnd - 2*ElbowRadius(ND_FiTrunk) - X_FiTrunkPipeEnd - TeeLength(ND_FiTrunk) - 2*SocketDepth(ND_FiTrunk)) if EN_DoubleTrain == 0
    (Y_FiInPipe2bEnd - 2*ElbowRadius(ND_FiTrunk) - X_FiTrunkPipeEnd) otherwise
L_FiInPipe2e := 2*SocketDepth(ND_FiTrunk)
FiInPipe2c :=
    if EN_DoubleTrain == 0
        PipeF([
            X_FiInPipe2bEnd - ElbowRadius(ND_FiTrunk);
            FiInletCoupling2_origin[1] + ElbowRadius(ND_FiTrunk);
            Z_FiInPipe2aEnd - ElbowRadius(ND_FiTrunk)
        ], L_FiInPipe2c, [-90; 0]*deg, ND_FiTrunk, PS_Default)
    otherwise
        PipeF([
            FiInletCoupling2_origin[0] - ElbowRadius(ND_FiTrunk);
            Y_FiInPipe2bEnd - ElbowRadius(ND_FiTrunk);
            Z_FiInPipe2aEnd - ElbowRadius(ND_FiTrunk)
        ], L_FiInPipe2c, [180; 0]*deg, ND_FiTrunk, PS_Default)
FiInPipe2d :=
    if EN_DoubleTrain == 0
        PipeF([
            X_FiInPipe2bEnd - 2*ElbowRadius(ND_FiTrunk);
            Y_FiInPipe2cEnd + ElbowRadius(ND_FiTrunk);
            Z_FiInPipe2aEnd - ElbowRadius(ND_FiTrunk)
        ], L_FiInPipe2d, [0; 0]*deg, ND_FiTrunk, PS_Default)
    otherwise
        PipeF([
            X_FiInPipe2cEnd - ElbowRadius(ND_FiTrunk);
            Y_FiInPipe2bEnd - 2*ElbowRadius(ND_FiTrunk);
            Z_FiInPipe2aEnd - ElbowRadius(ND_FiTrunk)
        ], L_FiInPipe2d, [90; 0]*deg, ND_FiTrunk, PS_Default)
TeeLength(ND_FiTrunk) + 2*SocketDepth(ND_FiTrunk)
FiInPipe2e :=
    if EN_DoubleTrain == 0
        PipeF([
            X_FiInPipe2bEnd - 2*ElbowRadius(ND_FiTrunk) - L_FiInPipe2d - TeeLength(ND_FiTrunk);
            Y_FiInPipe2cEnd + ElbowRadius(ND_FiTrunk);
            Z_FiInPipe2aEnd - ElbowRadius(ND_FiTrunk)
        ], L_FiInPipe2e, [0; 0]*deg, ND_FiTrunk, PS_Default)
    otherwise
        PipeF([
            X_FiInPipe2cEnd - ElbowRadius(ND_FiTrunk);
            Y_FiInPipe2bEnd - 2*ElbowRadius(ND_FiTrunk) - L_FiInPipe2d - TeeLength(ND_FiTrunk);
            Z_FiInPipe2aEnd - ElbowRadius(ND_FiTrunk)
        ], L_FiInPipe2e, [90; 0]*deg, ND_FiTrunk, PS_Default)
FiIn2PipeScript := stack(FiInPipe2a, FiInPipe2b, FiInPipe2c, FiInPipe2d, FiInPipe2e)
# Inlet 2 Fittings
FiEntBoxCoupling2 := CouplingSUBF(FiInletCoupling2_origin, [0; 90]*deg, ND_FiTrunk, PS_Default, ["FiEntExitBoxCon"])
FiInElbow2a := ElbowF([FiInletCoupling2_origin[0]; FiInletCoupling2_origin[1]; Z_FiInPipe2aEnd], [
    0;
    {
        0 if EN_DoubleTrain == 0
        (-90) otherwise
    };
    -90
]*deg, ND_FiTrunk, PS_Default)
FiInElbow2b :=
    ElbowF([X_FiInPipe2bEnd; FiInletCoupling2_origin[1]; Z_FiInPipe2aEnd - ElbowRadius(ND_FiTrunk)], [-90; 180; 0]*deg, ND_FiTrunk, PS_Default) if EN_DoubleTrain == 0
    ElbowF([FiInletCoupling2_origin[0]; Y_FiInPipe2bEnd; Z_FiInPipe2aEnd - ElbowRadius(ND_FiTrunk)], [180; 180; 0]*deg, ND_FiTrunk, PS_Default) otherwise
FiInElbow2c :=
    if EN_DoubleTrain == 0
        ElbowF([
            X_FiInPipe2bEnd - ElbowRadius(ND_FiTrunk);
            Y_FiInPipe2cEnd;
            Z_FiInPipe2aEnd - ElbowRadius(ND_FiTrunk)
        ], [0; 0; 0]*deg, ND_FiTrunk, PS_Default)
    otherwise
        ElbowF([
            X_FiInPipe2cEnd;
            Y_FiInPipe2bEnd - ElbowRadius(ND_FiTrunk);
            Z_FiInPipe2aEnd - ElbowRadius(ND_FiTrunk)
        ], [90; 0; 0]*deg, ND_FiTrunk, PS_Default)
FiInTee2a :=
    if EN_DoubleTrain == 0
        TeeF([
            X_FiInPipe2bEnd - 2*ElbowRadius(ND_FiTrunk) - L_FiInPipe2d - TeeLength(ND_FiTrunk)/2;
            Y_FiInPipe2cEnd + ElbowRadius(ND_FiTrunk) + ShortTeeLength(ND_FiTrunk)*cos(AN_FiTrunkValves);
            Z_FiInPipe2aEnd - ElbowRadius(ND_FiTrunk) - ShortTeeLength(ND_FiTrunk)*sin(AN_FiTrunkValves)
        ], [0 deg; 0 deg; -AN_FiTrunkValves], ND_FiTrunk, PS_Default)
    otherwise
        TeeF([
            X_FiInPipe2cEnd - ElbowRadius(ND_FiTrunk) + ShortTeeLength(ND_FiTrunk)*cos(AN_FiTrunkValves);
            Y_FiInPipe2bEnd - 2*ElbowRadius(ND_FiTrunk) - L_FiInPipe2d - TeeLength(ND_FiTrunk)/2;
            Z_FiInPipe2aEnd - ElbowRadius(ND_FiTrunk) - ShortTeeLength(ND_FiTrunk)*sin(AN_FiTrunkValves)
        ], [90 deg; -AN_FiTrunkValves; 0 deg], ND_FiTrunk, PS_Default)
FiIn2FittingScript := stack(FiEntBoxCoupling2, FiInElbow2a, FiInElbow2b, FiInElbow2c, FiInTee2a)
# Inlet 2 Valve
FiInSmallPipe2 :=
    if EN_DoubleTrain == 0
        PipeF([
            X_FiInPipe2bEnd - 2*ElbowRadius(ND_FiTrunk) - L_FiInPipe2d - TeeLength(ND_FiTrunk)/2;
            Y_FiInPipe2cEnd + ElbowRadius(ND_FiTrunk) + ShortTeeLength(ND_FiTrunk)*cos(AN_FiTrunkValves);
            Z_FiInPipe2aEnd - ElbowRadius(ND_FiTrunk) - ShortTeeLength(ND_FiTrunk)*sin(AN_FiTrunkValves)
        ], 2*SocketDepth(ND_FiTrunk), [-90 deg; 0 deg; 0 deg], ND_FiTrunk, PS_Default)
    otherwise
        PipeF([
            X_FiInPipe2cEnd - ElbowRadius(ND_FiTrunk) + ShortTeeLength(ND_FiTrunk)*cos(AN_FiTrunkValves);
            Y_FiInPipe2bEnd - 2*ElbowRadius(ND_FiTrunk) - L_FiInPipe2d - TeeLength(ND_FiTrunk)/2;
            Z_FiInPipe2aEnd - ElbowRadius(ND_FiTrunk) - ShortTeeLength(ND_FiTrunk)*sin(AN_FiTrunkValves)
        ], 2*SocketDepth(ND_FiTrunk), [0 deg; 0 deg; 0 deg], ND_FiTrunk, PS_Default)
FiIn2SmallPipeRotate :=
    if EN_DoubleTrain == 0
        Rotate3DLast([
            X_FiInPipe2bEnd - 2*ElbowRadius(ND_FiTrunk) - L_FiInPipe2d - TeeLength(ND_FiTrunk)/2;
            Y_FiInPipe2cEnd + ElbowRadius(ND_FiTrunk) + ShortTeeLength(ND_FiTrunk)*cos(AN_FiTrunkValves);
            Z_FiInPipe2aEnd - ElbowRadius(ND_FiTrunk) - ShortTeeLength(ND_FiTrunk)*sin(AN_FiTrunkValves)
        ], "x", -AN_FiTrunkValves)
    otherwise
        Rotate3DLast([
            X_FiInPipe2cEnd - ElbowRadius(ND_FiTrunk) + ShortTeeLength(ND_FiTrunk)*cos(AN_FiTrunkValves);
            Y_FiInPipe2bEnd - 2*ElbowRadius(ND_FiTrunk) - L_FiInPipe2d - TeeLength(ND_FiTrunk)/2;
            Z_FiInPipe2aEnd - ElbowRadius(ND_FiTrunk) - ShortTeeLength(ND_FiTrunk)*sin(AN_FiTrunkValves)
        ], "y", -AN_FiTrunkValves)
FiInValve2 :=
    if EN_DoubleTrain == 0
        insertdwg("https://confluence.cornell.edu/download/attachments/173604905/Sed-Scaled-Gate-Valve-Threaded.dwg", [
            X_FiInPipe2bEnd - 2*ElbowRadius(ND_FiTrunk) - L_FiInPipe2d - TeeLength(ND_FiTrunk)/2;
            Y_FiInPipe2cEnd + ElbowRadius(ND_FiTrunk) + (ShortTeeLength(ND_FiTrunk) + 2*SocketDepth(ND_FiTrunk))*cos(AN_FiTrunkValves);
            Z_FiInPipe2aEnd - ElbowRadius(ND_FiTrunk) - (ShortTeeLength(ND_FiTrunk) + 2*SocketDepth(ND_FiTrunk))*sin(AN_FiTrunkValves)
        ], 2*outerradius(ND_FiTrunk)/(1.16 m), 2*outerradius(ND_FiTrunk)/(1.16 m), -90 deg)
    otherwise
        insertdwg("https://confluence.cornell.edu/download/attachments/173604905/Sed-Scaled-Gate-Valve-Threaded.dwg", [
            X_FiInPipe2cEnd - ElbowRadius(ND_FiTrunk) + (ShortTeeLength(ND_FiTrunk) + 2*SocketDepth(ND_FiTrunk))*cos(AN_FiTrunkValves);
            Y_FiInPipe2bEnd - 2*ElbowRadius(ND_FiTrunk) - L_FiInPipe2d - TeeLength(ND_FiTrunk)/2;
            Z_FiInPipe2aEnd - ElbowRadius(ND_FiTrunk) - (ShortTeeLength(ND_FiTrunk) + 2*SocketDepth(ND_FiTrunk))*sin(AN_FiTrunkValves)
        ], 2*outerradius(ND_FiTrunk)/(1.16 m), 2*outerradius(ND_FiTrunk)/(1.16 m), 0 deg)
FiIn2ValveRotate :=
    if EN_DoubleTrain == 0
        Rotate3DLast([
            X_FiInPipe2bEnd - 2*ElbowRadius(ND_FiTrunk) - L_FiInPipe2d - TeeLength(ND_FiTrunk)/2;
            Y_FiInPipe2cEnd + ElbowRadius(ND_FiTrunk) + (ShortTeeLength(ND_FiTrunk) + 2*SocketDepth(ND_FiTrunk))*cos(AN_FiTrunkValves);
            Z_FiInPipe2aEnd - ElbowRadius(ND_FiTrunk) - ShortTeeLength(ND_FiTrunk)*sin(AN_FiTrunkValves)
        ], "x", -AN_FiTrunkValves)
    otherwise
        Rotate3DLast([
            X_FiInPipe2cEnd - ElbowRadius(ND_FiTrunk) + (ShortTeeLength(ND_FiTrunk) + 2*SocketDepth(ND_FiTrunk))*cos(AN_FiTrunkValves);
            Y_FiInPipe2bEnd - 2*ElbowRadius(ND_FiTrunk) - L_FiInPipe2d - TeeLength(ND_FiTrunk)/2;
            Z_FiInPipe2aEnd - ElbowRadius(ND_FiTrunk) - ShortTeeLength(ND_FiTrunk)*sin(AN_FiTrunkValves)
        ], "y", -AN_FiTrunkValves)
FiSmallPipeScript := stack(FiSmallPipeScript, FiInSmallPipe2, FiIn2SmallPipeRotate)
FiValveScript := stack(FiValveScript, FiInValve2, FiIn2ValveRotate)
# Inlet 3 Pipes
Z_FiInPipe3aEnd := Z_FiInPipe2aEnd + 2*H_FiLayer
L_FiInPipe3a := FiInletCoupling3_origin[2] - Z_FiInPipe3aEnd
FiInPipe3a := PipeSUBF(FiInletCoupling3_origin, FiInletCoupling3_origin[2] - Z_FiInPipe3aEnd, [0; 270]*deg, ND_FiTrunk, PS_Default, ["FiEntExitBoxCon"])
X_FiInPipe3bEnd :=
    X_FiInPipe2bEnd if EN_DoubleTrain == 0
    Y_FiInPipe2bEnd otherwise
Y_FiInPipe3bEnd := Y_FiInPipe2bEnd
L_FiInPipe3b :=
    (FiInletCoupling3_origin[0] - ElbowRadius(ND_FiTrunk) - X_FiInPipe3bEnd) if EN_DoubleTrain == 0
    (FiInletCoupling3_origin[1] - ElbowRadius(ND_FiTrunk) - Y_FiInPipe3bEnd) otherwise
FiInPipe3b :=
    if EN_DoubleTrain == 0
        PipeF([
            FiInletCoupling3_origin[0] - ElbowRadius(ND_FiTrunk);
            FiInletCoupling3_origin[1];
            Z_FiInPipe3aEnd - ElbowRadius(ND_FiTrunk)
        ], L_FiInPipe3b, [0; 0]*deg, ND_FiTrunk, PS_Default)
    otherwise
        PipeF([
            FiInletCoupling3_origin[0];
            FiInletCoupling3_origin[1] - ElbowRadius(ND_FiTrunk);
            Z_FiInPipe3aEnd - ElbowRadius(ND_FiTrunk)
        ], L_FiInPipe3b, [90; 0]*deg, ND_FiTrunk, PS_Default)
X_FiInPipe3cEnd := X_FiInPipe2cEnd
Y_FiInPipe3cEnd := Y_FiInPipe2cEnd
L_FiInPipe3c :=
    (Y_FiInPipe3cEnd - (FiInletCoupling3_origin[1] + ElbowRadius(ND_FiTrunk))) if EN_DoubleTrain == 0
    (X_FiInPipe3cEnd - (FiInletCoupling3_origin[0] - ElbowRadius(ND_FiTrunk))) otherwise
L_FiInPipe3d == {
    (X_FiInPipe3bEnd - 2*ElbowRadius(ND_FiTrunk) - X_FiTrunkPipeEnd) if EN_DoubleTrain == 0
    (Y_FiInPipe3bEnd - 2*ElbowRadius(ND_FiTrunk) - X_FiTrunkPipeEnd) otherwise
}
L_FiInPipe3d :=
    (X_FiInPipe3bEnd - 2*ElbowRadius(ND_FiTrunk) - X_FiTrunkPipeEnd - TeeLength(ND_FiTrunk) - 2*SocketDepth(ND_FiTrunk)) if EN_DoubleTrain == 0
    (Y_FiInPipe3bEnd - 2*ElbowRadius(ND_FiTrunk) - X_FiTrunkPipeEnd - TeeLength(ND_FiTrunk) - 2*SocketDepth(ND_FiTrunk)) otherwise
L_FiInPipe3e := 2*SocketDepth(ND_FiTrunk)
FiInPipe3c :=
    if EN_DoubleTrain == 0
        PipeF([
            X_FiInPipe3bEnd - ElbowRadius(ND_FiTrunk);
            FiInletCoupling3_origin[1] + ElbowRadius(ND_FiTrunk);
            Z_FiInPipe3aEnd - ElbowRadius(ND_FiTrunk)
        ], L_FiInPipe3c, [-90; 0]*deg, ND_FiTrunk, PS_Default)
    otherwise
        PipeF([
            FiInletCoupling3_origin[0] - ElbowRadius(ND_FiTrunk);
            Y_FiInPipe3bEnd - ElbowRadius(ND_FiTrunk);
            Z_FiInPipe3aEnd - ElbowRadius(ND_FiTrunk)
        ], L_FiInPipe3c, [180; 0]*deg, ND_FiTrunk, PS_Default)
FiInPipe3d :=
    if EN_DoubleTrain == 0
        PipeF([
            X_FiInPipe3bEnd - 2*ElbowRadius(ND_FiTrunk);
            Y_FiInPipe3cEnd + ElbowRadius(ND_FiTrunk);
            Z_FiInPipe3aEnd - ElbowRadius(ND_FiTrunk)
        ], L_FiInPipe3d, [0; 0]*deg, ND_FiTrunk, PS_Default)
    otherwise
        PipeF([
            X_FiInPipe3cEnd - ElbowRadius(ND_FiTrunk);
            Y_FiInPipe3bEnd - 2*ElbowRadius(ND_FiTrunk);
            Z_FiInPipe3aEnd - ElbowRadius(ND_FiTrunk)
        ], L_FiInPipe3d, [90; 0]*deg, ND_FiTrunk, PS_Default)
FiInPipe3e :=
    if EN_DoubleTrain == 0
        PipeF([
            X_FiInPipe3bEnd - 2*ElbowRadius(ND_FiTrunk) - L_FiInPipe3d - TeeLength(ND_FiTrunk);
            Y_FiInPipe3cEnd + ElbowRadius(ND_FiTrunk);
            Z_FiInPipe3aEnd - ElbowRadius(ND_FiTrunk)
        ], L_FiInPipe3e, [0; 0]*deg, ND_FiTrunk, PS_Default)
    otherwise
        PipeF([
            X_FiInPipe3cEnd - ElbowRadius(ND_FiTrunk);
            Y_FiInPipe3bEnd - 2*ElbowRadius(ND_FiTrunk) - L_FiInPipe3d - TeeLength(ND_FiTrunk);
            Z_FiInPipe3aEnd - ElbowRadius(ND_FiTrunk)
        ], L_FiInPipe3e, [90; 0]*deg, ND_FiTrunk, PS_Default)
FiIn3PipeScript := stack(FiInPipe3a, FiInPipe3b, FiInPipe3c, FiInPipe3d, FiInPipe3e, FiEntExitPipeFrz)
here
# Inlet 3 Fittings
FiEntBoxCoupling3 := CouplingSUBF(FiInletCoupling3_origin, [0; 90]*deg, ND_FiTrunk, PS_Default, ["FiEntExitBoxCon"])
FiInElbow3a := ElbowF([FiInletCoupling3_origin[0]; FiInletCoupling3_origin[1]; Z_FiInPipe3aEnd], [
    0;
    {
        0 if EN_DoubleTrain == 0
        (-90) otherwise
    };
    -90
]*deg, ND_FiTrunk, PS_Default)
FiInElbow3b :=
    ElbowF([X_FiInPipe3bEnd; FiInletCoupling3_origin[1]; Z_FiInPipe3aEnd - ElbowRadius(ND_FiTrunk)], [-90; 180; 0]*deg, ND_FiTrunk, PS_Default) if EN_DoubleTrain == 0
    ElbowF([FiInletCoupling3_origin[0]; Y_FiInPipe3bEnd; Z_FiInPipe3aEnd - ElbowRadius(ND_FiTrunk)], [180; 180; 0]*deg, ND_FiTrunk, PS_Default) otherwise
FiInElbow3c :=
    if EN_DoubleTrain == 0
        ElbowF([
            X_FiInPipe3bEnd - ElbowRadius(ND_FiTrunk);
            Y_FiInPipe3cEnd;
            Z_FiInPipe3aEnd - ElbowRadius(ND_FiTrunk)
        ], [0; 0; 0]*deg, ND_FiTrunk, PS_Default)
    otherwise
        ElbowF([
            X_FiInPipe3cEnd;
            Y_FiInPipe3bEnd - ElbowRadius(ND_FiTrunk);
            Z_FiInPipe3aEnd - ElbowRadius(ND_FiTrunk)
        ], [90; 0; 0]*deg, ND_FiTrunk, PS_Default)
FiInTee3a :=
    if EN_DoubleTrain == 0
        TeeF([
            X_FiInPipe3bEnd - 2*ElbowRadius(ND_FiTrunk) - L_FiInPipe3d - TeeLength(ND_FiTrunk)/2;
            Y_FiInPipe3cEnd + ElbowRadius(ND_FiTrunk) + ShortTeeLength(ND_FiTrunk)*cos(AN_FiTrunkValves);
            Z_FiInPipe3aEnd - ElbowRadius(ND_FiTrunk) - ShortTeeLength(ND_FiTrunk)*sin(AN_FiTrunkValves)
        ], [0 deg; 0 deg; -AN_FiTrunkValves], ND_FiTrunk, PS_Default)
    otherwise
        TeeF([
            X_FiInPipe3cEnd - ElbowRadius(ND_FiTrunk) + ShortTeeLength(ND_FiTrunk)*cos(AN_FiTrunkValves);
            Y_FiInPipe3bEnd - 2*ElbowRadius(ND_FiTrunk) - L_FiInPipe3d - TeeLength(ND_FiTrunk)/2;
            Z_FiInPipe3aEnd - ElbowRadius(ND_FiTrunk) - ShortTeeLength(ND_FiTrunk)*sin(AN_FiTrunkValves)
        ], [90 deg; -AN_FiTrunkValves; 0 deg], ND_FiTrunk, PS_Default)
FiIn3FittingScript := stack(FiEntBoxCoupling3, FiInElbow3a, FiInElbow3b, FiInElbow3c, FiInTee3a, FiEntExitFittingFrz)
here
# Inlet 3 Valve
FiInSmallPipe3 :=
    if EN_DoubleTrain == 0
        PipeF([
            X_FiInPipe3bEnd - 2*ElbowRadius(ND_FiTrunk) - L_FiInPipe3d - TeeLength(ND_FiTrunk)/2;
            Y_FiInPipe3cEnd + ElbowRadius(ND_FiTrunk) + ShortTeeLength(ND_FiTrunk)*cos(AN_FiTrunkValves);
            Z_FiInPipe3aEnd - ElbowRadius(ND_FiTrunk) - ShortTeeLength(ND_FiTrunk)*sin(AN_FiTrunkValves)
        ], 2*SocketDepth(ND_FiTrunk), [-90 deg; 0 deg; 0 deg], ND_FiTrunk, PS_Default)
    otherwise
        PipeF([
            X_FiInPipe3cEnd - ElbowRadius(ND_FiTrunk) + ShortTeeLength(ND_FiTrunk)*cos(AN_FiTrunkValves);
            Y_FiInPipe3bEnd - 2*ElbowRadius(ND_FiTrunk) - L_FiInPipe3d - TeeLength(ND_FiTrunk)/2;
            Z_FiInPipe3aEnd - ElbowRadius(ND_FiTrunk) - ShortTeeLength(ND_FiTrunk)*sin(AN_FiTrunkValves)
        ], 2*SocketDepth(ND_FiTrunk), [0 deg; 0 deg; 0 deg], ND_FiTrunk, PS_Default)
FiIn3SmallPipeRotate :=
    if EN_DoubleTrain == 0
        Rotate3DLast([
            X_FiInPipe3bEnd - 2*ElbowRadius(ND_FiTrunk) - L_FiInPipe3d - TeeLength(ND_FiTrunk)/2;
            Y_FiInPipe3cEnd + ElbowRadius(ND_FiTrunk) + ShortTeeLength(ND_FiTrunk)*cos(AN_FiTrunkValves);
            Z_FiInPipe3aEnd - ElbowRadius(ND_FiTrunk) - ShortTeeLength(ND_FiTrunk)*sin(AN_FiTrunkValves)
        ], "x", -AN_FiTrunkValves)
    otherwise
        Rotate3DLast([
            X_FiInPipe3cEnd - ElbowRadius(ND_FiTrunk) + ShortTeeLength(ND_FiTrunk)*cos(AN_FiTrunkValves);
            Y_FiInPipe3bEnd - 2*ElbowRadius(ND_FiTrunk) - L_FiInPipe3d - TeeLength(ND_FiTrunk)/2;
            Z_FiInPipe3aEnd - ElbowRadius(ND_FiTrunk) - ShortTeeLength(ND_FiTrunk)*sin(AN_FiTrunkValves)
        ], "y", -AN_FiTrunkValves)
FiInValve3 :=
    if EN_DoubleTrain == 0
        insertdwg("https://confluence.cornell.edu/download/attachments/173604905/Sed-Scaled-Gate-Valve-Threaded.dwg", [
            X_FiInPipe2bEnd - 2*ElbowRadius(ND_FiTrunk) - L_FiInPipe2d - TeeLength(ND_FiTrunk)/2;
            Y_FiInPipe2cEnd + ElbowRadius(ND_FiTrunk) + (ShortTeeLength(ND_FiTrunk) + 2*SocketDepth(ND_FiTrunk))*cos(AN_FiTrunkValves);
            Z_FiInPipe2aEnd + 2*H_FiLayer - ElbowRadius(ND_FiTrunk) - (ShortTeeLength(ND_FiTrunk) + 2*SocketDepth(ND_FiTrunk))*sin(AN_FiTrunkValves)
        ], 2*outerradius(ND_FiTrunk)/(1.16 m), 2*outerradius(ND_FiTrunk)/(1.16 m), -90 deg)
    otherwise
        insertdwg("https://confluence.cornell.edu/download/attachments/173604905/Sed-Scaled-Gate-Valve-Threaded.dwg", [
            X_FiInPipe2cEnd - ElbowRadius(ND_FiTrunk) + (ShortTeeLength(ND_FiTrunk) + 2*SocketDepth(ND_FiTrunk))*cos(AN_FiTrunkValves);
            Y_FiInPipe2bEnd - 2*ElbowRadius(ND_FiTrunk) - L_FiInPipe2d - TeeLength(ND_FiTrunk)/2;
            Z_FiInPipe2aEnd + 2*H_FiLayer - ElbowRadius(ND_FiTrunk) - (ShortTeeLength(ND_FiTrunk) + 2*SocketDepth(ND_FiTrunk))*sin(AN_FiTrunkValves)
        ], 2*outerradius(ND_FiTrunk)/(1.16 m), 2*outerradius(ND_FiTrunk)/(1.16 m), 0 deg)
# the y and z dimensions of this are messed up.
FiIn3ValveRotate :=
    if EN_DoubleTrain == 0
        Rotate3DLast([
            X_FiInPipe3bEnd - 2*ElbowRadius(ND_FiTrunk) - L_FiInPipe3d - TeeLength(ND_FiTrunk)/2;
            Y_FiInPipe3cEnd + ElbowRadius(ND_FiTrunk) + (ShortTeeLength(ND_FiTrunk) + 2*SocketDepth(ND_FiTrunk))*cos(AN_FiTrunkValves);
            Z_FiInPipe3aEnd - ElbowRadius(ND_FiTrunk) - ShortTeeLength(ND_FiTrunk)*sin(AN_FiTrunkValves)
        ], "x", -AN_FiTrunkValves)
    otherwise
        Rotate3DLast([
            X_FiInPipe3cEnd - ElbowRadius(ND_FiTrunk) + (ShortTeeLength(ND_FiTrunk) + 2*SocketDepth(ND_FiTrunk))*cos(AN_FiTrunkValves);
            Y_FiInPipe3bEnd - 2*ElbowRadius(ND_FiTrunk) - L_FiInPipe3d - TeeLength(ND_FiTrunk)/2;
            Z_FiInPipe3aEnd - ElbowRadius(ND_FiTrunk) - ShortTeeLength(ND_FiTrunk)*sin(AN_FiTrunkValves)
        ], "y", -AN_FiTrunkValves)
FiSmallPipeScript := stack(FiSmallPipeScript, FiInSmallPipe3, FiIn3SmallPipeRotate)
FiValveScript := stack(FiValveScript, FiInValve3, FiIn3ValveRotate)
# Outlet 0 Pipes
Z_FiOutPipe0aEnd := Z_FiInPipe1aEnd + H_FiLayer
L_FiOutPipe0a := FiExitCoupling0_origin[2] - Z_FiOutPipe0aEnd
L_FiOutPipe0b == {
    (FiExitCoupling0_origin[0] - ElbowRadius(ND_FiTrunk) - X_FiTrunkPipeEnd) if EN_DoubleTrain == 0
    (FiExitCoupling0_origin[1] - ElbowRadius(ND_FiTrunk) - X_FiTrunkPipeEnd) otherwise
}
L_FiOutPipe0b :=
    (FiExitCoupling0_origin[0] - ElbowRadius(ND_FiTrunk) - X_FiTrunkPipeEnd - TeeLength(ND_FiTrunk) - 2*SocketDepth(ND_FiTrunk)) if EN_DoubleTrain == 0
    (FiExitCoupling0_origin[1] - ElbowRadius(ND_FiTrunk) - X_FiTrunkPipeEnd - TeeLength(ND_FiTrunk) - 2*SocketDepth(ND_FiTrunk)) otherwise
L_FiOutPipe0c := 2*SocketDepth(ND_FiTrunk)
FiOutPipe0a := PipeSUBF(FiExitCoupling0_origin, FiExitCoupling0_origin[2] - Z_FiOutPipe0aEnd, [0; -90]*deg, ND_FiTrunk, PS_Default, ["FiEntExitBoxCon"])
FiOutPipe0b :=
    if EN_DoubleTrain == 0
        PipeF([
            FiExitCoupling0_origin[0] - ElbowRadius(ND_FiTrunk);
            FiExitCoupling0_origin[1];
            Z_FiOutPipe0aEnd - ElbowRadius(ND_FiTrunk)
        ], L_FiOutPipe0b, [0; 0]*deg, ND_FiTrunk, PS_Default)
    otherwise
        PipeF([
            FiExitCoupling0_origin[0];
            FiExitCoupling0_origin[1] - ElbowRadius(ND_FiTrunk);
            Z_FiOutPipe0aEnd - ElbowRadius(ND_FiTrunk)
        ], L_FiOutPipe0b, [90; 0]*deg, ND_FiTrunk, PS_Default)
FiOutPipe0c :=
    if EN_DoubleTrain == 0
        PipeF([
            FiExitCoupling0_origin[0] - ElbowRadius(ND_FiTrunk) - L_FiOutPipe0b - TeeLength(ND_FiTrunk);
            FiExitCoupling0_origin[1];
            Z_FiOutPipe0aEnd - ElbowRadius(ND_FiTrunk)
        ], L_FiOutPipe0c, [0; 0]*deg, ND_FiTrunk, PS_Default)
    otherwise
        PipeF([
            FiExitCoupling0_origin[0];
            FiExitCoupling0_origin[1] - ElbowRadius(ND_FiTrunk) - L_FiOutPipe0b - TeeLength(ND_FiTrunk);
            Z_FiOutPipe0aEnd - ElbowRadius(ND_FiTrunk)
        ], L_FiOutPipe0c, [90; 0]*deg, ND_FiTrunk, PS_Default)
FiOut0PipeScript := stack(FiEntExitPipesSelect, FiOutPipe0a, FiOutPipe0b, FiOutPipe0c)
here
# Outlet 0 Fittings
FiExChanCoupling0 := CouplingSUBF(FiExitCoupling0_origin, [0; 90]*deg, ND_FiTrunk, PS_Default, ["FiEntExitBoxCon"])
FiOutElbow0a := ElbowF([FiExitCoupling0_origin[0]; FiExitCoupling0_origin[1]; Z_FiOutPipe0aEnd], [
    0;
    {
        0 if EN_DoubleTrain == 0
        (-90) otherwise
    };
    -90
]*deg, ND_FiTrunk, PS_Default)
FiOutTee0a :=
    if EN_DoubleTrain == 0
        TeeF([
            FiExitCoupling0_origin[0] - ElbowRadius(ND_FiTrunk) - L_FiOutPipe0b - TeeLength(ND_FiTrunk)/2;
            FiExitCoupling0_origin[1] + ShortTeeLength(ND_FiTrunk)*cos(AN_FiTrunkValves);
            Z_FiOutPipe0aEnd - ElbowRadius(ND_FiTrunk) - ShortTeeLength(ND_FiTrunk)*sin(AN_FiTrunkValves)
        ], [0 deg; 0 deg; -AN_FiTrunkValves], ND_FiTrunk, PS_Default)
    otherwise
        TeeF([
            FiExitCoupling0_origin[0] + ShortTeeLength(ND_FiTrunk)*cos(AN_FiTrunkValves);
            FiExitCoupling0_origin[1] - ElbowRadius(ND_FiTrunk) - L_FiOutPipe0b - TeeLength(ND_FiTrunk)/2;
            Z_FiOutPipe0aEnd - ElbowRadius(ND_FiTrunk) - ShortTeeLength(ND_FiTrunk)*sin(AN_FiTrunkValves)
        ], [90 deg; -AN_FiTrunkValves; 0 deg], ND_FiTrunk, PS_Default)
FiExitCoupling0_origin[1] + ShortTeeLength(ND_FiTrunk)*cos(AN_FiTrunkValves) = 3.49903 m
FiOut0FittingScript := stack(FiEntExitFittingSelect, FiExChanCoupling0, FiOutElbow0a, FiOutTee0a)
here
Y_FiInPipe3cEnd + ElbowRadius(ND_FiTrunk) + ShortTeeLength(ND_FiTrunk)*cos(AN_FiTrunkValves) = 3.49903 m
# Outlet 0 Valve
FiOutSmallPipe0 :=
    if EN_DoubleTrain == 0
        PipeF([
            FiExitCoupling0_origin[0] - ElbowRadius(ND_FiTrunk) - L_FiOutPipe0b - TeeLength(ND_FiTrunk)/2;
            FiExitCoupling0_origin[1] + ShortTeeLength(ND_FiTrunk)*cos(AN_FiTrunkValves);
            Z_FiOutPipe0aEnd - ElbowRadius(ND_FiTrunk) - ShortTeeLength(ND_FiTrunk)*sin(AN_FiTrunkValves)
        ], 2*SocketDepth(ND_FiTrunk), [-90 deg; 0 deg; 0 deg], ND_FiTrunk, PS_Default)
    otherwise
        PipeF([
            FiExitCoupling0_origin[0] + ShortTeeLength(ND_FiTrunk)*cos(AN_FiTrunkValves);
            FiExitCoupling0_origin[1] - ElbowRadius(ND_FiTrunk) - L_FiOutPipe0b - TeeLength(ND_FiTrunk)/2;
            Z_FiOutPipe0aEnd - ElbowRadius(ND_FiTrunk) - ShortTeeLength(ND_FiTrunk)*sin(AN_FiTrunkValves)
        ], 2*SocketDepth(ND_FiTrunk), [0 deg; 0 deg; 0 deg], ND_FiTrunk, PS_Default)
FiOut0SmallPipeRotate :=
    if EN_DoubleTrain == 0
        Rotate3DLast([
            FiExitCoupling0_origin[0] - ElbowRadius(ND_FiTrunk) - L_FiOutPipe0b - TeeLength(ND_FiTrunk)/2;
            FiExitCoupling0_origin[1] + ShortTeeLength(ND_FiTrunk)*cos(AN_FiTrunkValves);
            Z_FiOutPipe0aEnd - ElbowRadius(ND_FiTrunk) - ShortTeeLength(ND_FiTrunk)*sin(AN_FiTrunkValves)
        ], "x", -AN_FiTrunkValves)
    otherwise
        Rotate3DLast([
            FiExitCoupling0_origin[0] + ShortTeeLength(ND_FiTrunk)*cos(AN_FiTrunkValves);
            FiExitCoupling0_origin[1] - ElbowRadius(ND_FiTrunk) - L_FiOutPipe0b - TeeLength(ND_FiTrunk)/2;
            Z_FiOutPipe0aEnd - ElbowRadius(ND_FiTrunk) - ShortTeeLength(ND_FiTrunk)*sin(AN_FiTrunkValves)
        ], "y", -AN_FiTrunkValves)
FiOutValve0 :=
    if EN_DoubleTrain == 0
        insertdwg("https://confluence.cornell.edu/download/attachments/173604905/Sed-Scaled-Gate-Valve-Threaded.dwg", [
            FiExitCoupling0_origin[0] - ElbowRadius(ND_FiTrunk) - L_FiOutPipe0b - TeeLength(ND_FiTrunk)/2;
            FiExitCoupling0_origin[1] + (ShortTeeLength(ND_FiTrunk) + 2*SocketDepth(ND_FiTrunk))*cos(AN_FiTrunkValves);
            Z_FiOutPipe0aEnd - ElbowRadius(ND_FiTrunk) - (ShortTeeLength(ND_FiTrunk) + 2*SocketDepth(ND_FiTrunk))*sin(AN_FiTrunkValves)
        ], 2*outerradius(ND_FiTrunk)/(1.16 m), 2*outerradius(ND_FiTrunk)/(1.16 m), -90 deg)
    otherwise
        insertdwg("https://confluence.cornell.edu/download/attachments/173604905/Sed-Scaled-Gate-Valve-Threaded.dwg", [
            FiExitCoupling0_origin[0] + (ShortTeeLength(ND_FiTrunk) + 2*SocketDepth(ND_FiTrunk))*cos(AN_FiTrunkValves);
            FiExitCoupling0_origin[1] - ElbowRadius(ND_FiTrunk) - L_FiOutPipe0b - TeeLength(ND_FiTrunk)/2;
            Z_FiOutPipe0aEnd - ElbowRadius(ND_FiTrunk) - (ShortTeeLength(ND_FiTrunk) + 2*SocketDepth(ND_FiTrunk))*sin(AN_FiTrunkValves)
        ], 2*outerradius(ND_FiTrunk)/(1.16 m), 2*outerradius(ND_FiTrunk)/(1.16 m), 0 deg)
FiOut0ValveRotate :=
    if EN_DoubleTrain == 0
        Rotate3DLast([
            FiExitCoupling0_origin[0] - ElbowRadius(ND_FiTrunk) - L_FiOutPipe0b - TeeLength(ND_FiTrunk)/2;
            FiExitCoupling0_origin[1] + (ShortTeeLength(ND_FiTrunk) + 2*SocketDepth(ND_FiTrunk))*cos(AN_FiTrunkValves);
            Z_FiOutPipe0aEnd - ElbowRadius(ND_FiTrunk) - ShortTeeLength(ND_FiTrunk)*sin(AN_FiTrunkValves)
        ], "x", -AN_FiTrunkValves)
    otherwise
        Rotate3DLast([
            FiExitCoupling0_origin[0] + (ShortTeeLength(ND_FiTrunk) + 2*SocketDepth(ND_FiTrunk))*cos(AN_FiTrunkValves);
            FiExitCoupling0_origin[1] - ElbowRadius(ND_FiTrunk) - L_FiOutPipe0b - TeeLength(ND_FiTrunk)/2;
            Z_FiOutPipe0aEnd - ElbowRadius(ND_FiTrunk) - ShortTeeLength(ND_FiTrunk)*sin(AN_FiTrunkValves)
        ], "y", -AN_FiTrunkValves)
FiSmallPipeScript := stack(FiSmallPipeScript, FiOutSmallPipe0, FiOut0SmallPipeRotate)
FiValveScript := stack(FiValveScript, FiOutValve0, FiOut0ValveRotate)
# Outlet 1 Pipes
Z_FiOutPipe1aEnd := Z_FiOutPipe0aEnd + 2*H_FiLayer
L_FiOutPipe1a := FiExitCoupling1_origin[2] - Z_FiOutPipe1aEnd
L_FiOutPipe1b == {
    (FiExitCoupling1_origin[0] - ElbowRadius(ND_FiTrunk) - X_FiTrunkPipeEnd) if EN_DoubleTrain == 0
    (FiExitCoupling1_origin[1] - ElbowRadius(ND_FiTrunk) - X_FiTrunkPipeEnd) otherwise
}
L_FiOutPipe1b :=
    (FiExitCoupling1_origin[0] - ElbowRadius(ND_FiTrunk) - X_FiTrunkPipeEnd - TeeLength(ND_FiTrunk) - 2*SocketDepth(ND_FiTrunk)) if EN_DoubleTrain == 0
    (FiExitCoupling1_origin[1] - ElbowRadius(ND_FiTrunk) - X_FiTrunkPipeEnd - TeeLength(ND_FiTrunk) - 2*SocketDepth(ND_FiTrunk)) otherwise
L_FiOutPipe1c := 2*SocketDepth(ND_FiTrunk)
FiOutPipe1a := PipeSUBF(FiExitCoupling1_origin, L_FiOutPipe1a, [0; -90]*deg, ND_FiTrunk, PS_Default, ["FiEntExitBoxCon"])
FiOutPipe1b :=
    if EN_DoubleTrain == 0
        PipeF([
            FiExitCoupling1_origin[0] - ElbowRadius(ND_FiTrunk);
            FiExitCoupling1_origin[1];
            Z_FiOutPipe1aEnd - ElbowRadius(ND_FiTrunk)
        ], L_FiOutPipe1b, [0; 0]*deg, ND_FiTrunk, PS_Default)
    otherwise
        PipeF([
            FiExitCoupling1_origin[0];
            FiExitCoupling1_origin[1] - ElbowRadius(ND_FiTrunk);
            Z_FiOutPipe1aEnd - ElbowRadius(ND_FiTrunk)
        ], L_FiOutPipe1b, [90; 0]*deg, ND_FiTrunk, PS_Default)
FiOutPipe1c :=
    if EN_DoubleTrain == 0
        PipeF([
            FiExitCoupling1_origin[0] - ElbowRadius(ND_FiTrunk) - L_FiOutPipe1b - TeeLength(ND_FiTrunk);
            FiExitCoupling1_origin[1];
            Z_FiOutPipe1aEnd - ElbowRadius(ND_FiTrunk)
        ], L_FiOutPipe1c, [0; 0]*deg, ND_FiTrunk, PS_Default)
    otherwise
        PipeF([
            FiExitCoupling1_origin[0];
            FiExitCoupling1_origin[1] - ElbowRadius(ND_FiTrunk) - L_FiOutPipe1b - TeeLength(ND_FiTrunk);
            Z_FiOutPipe1aEnd - ElbowRadius(ND_FiTrunk)
        ], L_FiOutPipe1c, [90; 0]*deg, ND_FiTrunk, PS_Default)
FiOut1PipeScript := stack(FiOutPipe1a, FiOutPipe1b, FiOutPipe1c)
# Outlet 1 Fittings
FiExChanCoupling1 := CouplingSUBF(FiExitCoupling1_origin, [0; 90]*deg, ND_FiTrunk, PS_Default, ["FiEntExitBoxCon"])
FiOutElbow1a := ElbowF([FiExitCoupling1_origin[0]; FiExitCoupling1_origin[1]; Z_FiOutPipe1aEnd], [
    0;
    {
        0 if EN_DoubleTrain == 0
        (-90) otherwise
    };
    -90
]*deg, ND_FiTrunk, PS_Default)
FiOutTee1a :=
    if EN_DoubleTrain == 0
        TeeF([
            FiExitCoupling1_origin[0] - ElbowRadius(ND_FiTrunk) - L_FiOutPipe1b - TeeLength(ND_FiTrunk)/2;
            FiExitCoupling1_origin[1] + ShortTeeLength(ND_FiTrunk)*cos(AN_FiTrunkValves);
            Z_FiOutPipe1aEnd - ElbowRadius(ND_FiTrunk) - ShortTeeLength(ND_FiTrunk)*sin(AN_FiTrunkValves)
        ], [0 deg; 0 deg; -AN_FiTrunkValves], ND_FiTrunk, PS_Default)
    otherwise
        TeeF([
            FiExitCoupling1_origin[0] + ShortTeeLength(ND_FiTrunk)*cos(AN_FiTrunkValves);
            FiExitCoupling1_origin[1] - ElbowRadius(ND_FiTrunk) - L_FiOutPipe1b - TeeLength(ND_FiTrunk)/2;
            Z_FiOutPipe1aEnd - ElbowRadius(ND_FiTrunk) - ShortTeeLength(ND_FiTrunk)*sin(AN_FiTrunkValves)
        ], [90 deg; -AN_FiTrunkValves; 0 deg], ND_FiTrunk, PS_Default)
FiOut1FittingScript := stack(FiExChanCoupling1, FiOutElbow1a, FiOutTee1a)
# Outlet 1 Valve
FiOutSmallPipe1 :=
    if EN_DoubleTrain == 0
        PipeF([
            FiExitCoupling1_origin[0] - ElbowRadius(ND_FiTrunk) - L_FiOutPipe1b - TeeLength(ND_FiTrunk)/2;
            FiExitCoupling1_origin[1] + ShortTeeLength(ND_FiTrunk)*cos(AN_FiTrunkValves);
            Z_FiOutPipe1aEnd - ElbowRadius(ND_FiTrunk) - ShortTeeLength(ND_FiTrunk)*sin(AN_FiTrunkValves)
        ], 2*SocketDepth(ND_FiTrunk), [-90 deg; 0 deg; 0 deg], ND_FiTrunk, PS_Default)
    otherwise
        PipeF([
            FiExitCoupling1_origin[0] + ShortTeeLength(ND_FiTrunk)*cos(AN_FiTrunkValves);
            FiExitCoupling1_origin[1] - ElbowRadius(ND_FiTrunk) - L_FiOutPipe1b - TeeLength(ND_FiTrunk)/2;
            Z_FiOutPipe1aEnd - ElbowRadius(ND_FiTrunk) - ShortTeeLength(ND_FiTrunk)*sin(AN_FiTrunkValves)
        ], 2*SocketDepth(ND_FiTrunk), [0 deg; 0 deg; 0 deg], ND_FiTrunk, PS_Default)
FiOut1SmallPipeRotate :=
    if EN_DoubleTrain == 0
        Rotate3DLast([
            FiExitCoupling1_origin[0] - ElbowRadius(ND_FiTrunk) - L_FiOutPipe1b - TeeLength(ND_FiTrunk)/2;
            FiExitCoupling1_origin[1] + ShortTeeLength(ND_FiTrunk)*cos(AN_FiTrunkValves);
            Z_FiOutPipe1aEnd - ElbowRadius(ND_FiTrunk) - ShortTeeLength(ND_FiTrunk)*sin(AN_FiTrunkValves)
        ], "x", -AN_FiTrunkValves)
    otherwise
        Rotate3DLast([
            FiExitCoupling1_origin[0] + ShortTeeLength(ND_FiTrunk)*cos(AN_FiTrunkValves);
            FiExitCoupling1_origin[1] - ElbowRadius(ND_FiTrunk) - L_FiOutPipe1b - TeeLength(ND_FiTrunk)/2;
            Z_FiOutPipe1aEnd - ElbowRadius(ND_FiTrunk) - ShortTeeLength(ND_FiTrunk)*sin(AN_FiTrunkValves)
        ], "y", -AN_FiTrunkValves)
FiOutValve1 :=
    if EN_DoubleTrain == 0
        insertdwg("https://confluence.cornell.edu/download/attachments/173604905/Sed-Scaled-Gate-Valve-Threaded.dwg", [
            FiExitCoupling1_origin[0] - ElbowRadius(ND_FiTrunk) - L_FiOutPipe1b - TeeLength(ND_FiTrunk)/2;
            FiExitCoupling1_origin[1] + (ShortTeeLength(ND_FiTrunk) + 2*SocketDepth(ND_FiTrunk))*cos(AN_FiTrunkValves);
            Z_FiOutPipe1aEnd - ElbowRadius(ND_FiTrunk) - (ShortTeeLength(ND_FiTrunk) + 2*SocketDepth(ND_FiTrunk))*sin(AN_FiTrunkValves)
        ], 2*outerradius(ND_FiTrunk)/(1.16 m), 2*outerradius(ND_FiTrunk)/(1.16 m), -90 deg)
    otherwise
        insertdwg("https://confluence.cornell.edu/download/attachments/173604905/Sed-Scaled-Gate-Valve-Threaded.dwg", [
            FiExitCoupling1_origin[0] + (ShortTeeLength(ND_FiTrunk) + 2*SocketDepth(ND_FiTrunk))*cos(AN_FiTrunkValves);
            FiExitCoupling1_origin[1] - ElbowRadius(ND_FiTrunk) - L_FiOutPipe1b - TeeLength(ND_FiTrunk)/2;
            Z_FiOutPipe1aEnd - ElbowRadius(ND_FiTrunk) - (ShortTeeLength(ND_FiTrunk) + 2*SocketDepth(ND_FiTrunk))*sin(AN_FiTrunkValves)
        ], 2*outerradius(ND_FiTrunk)/(1.16 m), 2*outerradius(ND_FiTrunk)/(1.16 m), 0 deg)
FiOut1ValveRotate :=
    if EN_DoubleTrain == 0
        Rotate3DLast([
            FiExitCoupling1_origin[0] - ElbowRadius(ND_FiTrunk) - L_FiOutPipe1b - TeeLength(ND_FiTrunk)/2;
            FiExitCoupling1_origin[1] + (ShortTeeLength(ND_FiTrunk) + 2*SocketDepth(ND_FiTrunk))*cos(AN_FiTrunkValves);
            Z_FiOutPipe1aEnd - ElbowRadius(ND_FiTrunk) - ShortTeeLength(ND_FiTrunk)*sin(AN_FiTrunkValves)
        ], "x", -AN_FiTrunkValves)
    otherwise
        Rotate3DLast([
            FiExitCoupling1_origin[0] + (ShortTeeLength(ND_FiTrunk) + 2*SocketDepth(ND_FiTrunk))*cos(AN_FiTrunkValves);
            FiExitCoupling1_origin[1] - ElbowRadius(ND_FiTrunk) - L_FiOutPipe1b - TeeLength(ND_FiTrunk)/2;
            Z_FiOutPipe1aEnd - ElbowRadius(ND_FiTrunk) - ShortTeeLength(ND_FiTrunk)*sin(AN_FiTrunkValves)
        ], "y", -AN_FiTrunkValves)
FiSmallPipeScript := stack(FiSmallPipeScript, FiOutSmallPipe1, FiOut1SmallPipeRotate)
FiValveScript := stack(FiValveScript, FiOutValve1, FiOut1ValveRotate)
# Outlet 2 Pipes (exit box drain)
Z_FiExitDrainOutlet := Z_FiExitBottom - H_FiExitWasteDrop
X_FiExitHorizDrainPipeStart := FiInletChannel_Origin[0] + T_PlantWall - CouplingLength(ND_FiExitWaste) + SocketDepth(ND_FiExitWaste)
X_FiExitHorizDrainPipeEnd := FiExitCoupling3_origin[0] + ElbowRadius(ND_FiExitWaste)
Y_FiExitHorizDrainPipeStart := FiInletChannel_Origin[1] + W_FiInletChannel + T_PlantWall - CouplingLength(ND_FiExitWaste) + SocketDepth(ND_FiExitWaste)
Y_FiExitHorizDrainPipeEnd := FiExitCoupling3_origin[1] + ElbowRadius(ND_FiExitWaste)
L_FiOutPipe2a := FiExitCoupling3_origin[2] - Z_FiExitDrainOutlet - ElbowRadius(ND_FiExitWaste)
FiOutPipe2a := PipeSUBF(FiExitCoupling3_origin, L_FiOutPipe2a, [0; -90]*deg, ND_FiExitWaste, PS_Default, ["FiEntExitBoxCon"])
FiOut2PipeScript := FiOutPipe2a
# Oulet 2 Fittings (exit box drain)
FiExChanCoupling2 := CouplingSUBF(FiExitCoupling3_origin, [0; 90]*deg, ND_FiExitWaste, PS_Default, ["FiEntExitBoxCon"])
FiOutElbow2a :=
    if EN_DoubleTrain == 0
        ElbowF([
            FiExitCoupling3_origin[0] + ElbowRadius(ND_FiExitWaste);
            FiExitCoupling3_origin[1];
            Z_FiExitDrainOutlet
        ], [90; 0; 270]*deg, ND_FiExitWaste, PS_Default)
    otherwise
        ElbowF([
            FiExitCoupling3_origin[0];
            FiExitCoupling3_origin[1];
            Z_FiExitDrainOutlet + ElbowRadius(ND_FiExitWaste)
        ], [0; 90; 270]*deg, ND_FiExitWaste, PS_Default)
FiOut2FittingScript := stack(FiExChanCoupling2, FiOutElbow2a)
# Outlet 3 Pipes
L_FiOut3PipeZ := FiExitCoupling2_origin[2] - (Fi_origin[2] + outerradius(ND_FiBwManBranch) + H_FiBottomLayer + ElbowRadius(ND_FiTrunk))
L_FiOut3PipeX == {
    (FiExitCoupling2_origin[0] - Fi_origin[0] - T_FiWall - CouplingLength(ND_FiTrunk) + SocketDepth(ND_FiTrunk) - ElbowRadius(ND_FiTrunk)) if EN_DoubleTrain == 0
    (FiExitCoupling0_origin[0] - FiExitCoupling2_origin[0] + 2*ElbowRadius(ND_FiTrunk)) otherwise
}  # This length has been corrected mrf222 7/9/2014
L_FiOut3PipeX :=
    (FiExitCoupling2_origin[0] - Fi_origin[0] - T_FiWall - CouplingLength(ND_FiTrunk) + SocketDepth(ND_FiTrunk) - ElbowRadius(ND_FiTrunk) - TeeLength(ND_FiTrunk) - 2*SocketDepth(ND_FiTrunk)) if EN_DoubleTrain == 0
    (FiExitCoupling0_origin[0] - FiExitCoupling2_origin[0] + 2*ElbowRadius(ND_FiTrunk) - TeeLength(ND_FiTrunk) - 2*SocketDepth(ND_FiTrunk)) otherwise
L_FiOut3PipeXb := 2*SocketDepth(ND_FiTrunk)
L_FiOut3PipeY :=
    (FiExitCoupling0_origin[1] - FiExitCoupling2_origin[1] - 2*ElbowRadius(ND_FiTrunk)) if EN_DoubleTrain == 0
    (FiExitCoupling2_origin[1] - (Fi_origin[1] + L_Fi + T_FiWall + CouplingLength(ND_FiTrunk) - SocketDepth(ND_FiTrunk)) - ElbowRadius(ND_FiTrunk)) otherwise
FiOut3PipeZ :=
    if EN_DoubleTrain == 0
        PipeSUBF([
            FiExitCoupling2_origin[0];
            FiExitCoupling2_origin[1];
            Fi_origin[2] + outerradius(ND_FiBwManBranch) + H_FiBottomLayer + ElbowRadius(ND_FiTrunk)
        ], L_FiOut3PipeZ, [0; 90]*deg, ND_FiTrunk, PS_Default, ["FiEntExitBoxCon"])
    otherwise
        PipeSUBF([
            FiExitCoupling2_origin[0];
            FiExitCoupling2_origin[1];
            Fi_origin[2] + outerradius(ND_FiBwManBranch) + H_FiBottomLayer + ElbowRadius(ND_FiTrunk)
        ], L_FiOut3PipeZ, [0; 90]*deg, ND_FiTrunk, PS_Default, ["FiEntExitBoxCon"])
FiOut3PipeX :=
    if EN_DoubleTrain == 0
        PipeF([
            FiExitCoupling2_origin[0] - ElbowRadius(ND_FiTrunk);
            FiExitCoupling0_origin[1];
            Fi_origin[2] + outerradius(ND_FiBwManBranch) + H_FiBottomLayer
        ], L_FiOut3PipeX, [0; 0]*deg, ND_FiTrunk, PS_Default)
    otherwise
        PipeF([
            FiExitCoupling2_origin[0] - ElbowRadius(ND_FiTrunk);
            FiExitCoupling2_origin[1];
            Fi_origin[2] + outerradius(ND_FiBwManBranch) + H_FiBottomLayer
        ], L_FiOut3PipeX, [180; 0]*deg, ND_FiTrunk, PS_Default)
FiOut3PipeXb :=
    if EN_DoubleTrain == 0
        PipeF([
            FiExitCoupling2_origin[0] - ElbowRadius(ND_FiTrunk) - L_FiOut3PipeX - TeeLength(ND_FiTrunk);
            FiExitCoupling0_origin[1];
            Fi_origin[2] + outerradius(ND_FiBwManBranch) + H_FiBottomLayer
        ], L_FiOut3PipeXb, [0; 0]*deg, ND_FiTrunk, PS_Default)
    otherwise
        PipeF([
            FiExitCoupling2_origin[0] - ElbowRadius(ND_FiTrunk);
            FiExitCoupling2_origin[1] - L_FiOut3PipeX - TeeLength(ND_FiTrunk);
            Fi_origin[2] + outerradius(ND_FiBwManBranch) + H_FiBottomLayer
        ], L_FiOut3PipeXb, [180; 0]*deg, ND_FiTrunk, PS_Default)
FiOut3PipeY :=
    if EN_DoubleTrain == 0
        PipeF([
            FiExitCoupling2_origin[0];
            FiExitCoupling2_origin[1] + ElbowRadius(ND_FiTrunk);
            Fi_origin[2] + outerradius(ND_FiBwManBranch) + H_FiBottomLayer
        ], L_FiOut3PipeY, [270; 0]*deg, ND_FiTrunk, PS_Default)
    otherwise
        PipeF([
            FiExitCoupling2_origin[0] - 2*ElbowRadius(ND_FiTrunk) + L_FiOut3PipeX;
            FiExitCoupling2_origin[1] - ElbowRadius(ND_FiTrunk);
            Fi_origin[2] + outerradius(ND_FiBwManBranch) + H_FiBottomLayer
        ], L_FiOut3PipeY, [90; 0]*deg, ND_FiTrunk, PS_Default)
FiOut3PipeScript := stack(FiOut3PipeZ, FiOut3PipeX, FiOut3PipeXb, FiOut3PipeY, FiEntExitPipeFrz)
here
# Outlet 3 Fittings
FiExChanCoupling3 := CouplingSUBF(FiExitCoupling2_origin, [0; 90]*deg, ND_FiTrunk, PS_Default, ["FiEntExitBoxCon"])
FiOut3ElbowYZ := ElbowF([
    FiExitCoupling2_origin[0];
    FiExitCoupling2_origin[1] + ElbowRadius(ND_FiTrunk);
    Fi_origin[2] + outerradius(ND_FiBwManBranch) + H_FiBottomLayer
], [180; 270; 0]*deg, ND_FiTrunk, PS_Default)
FiOut3ElbowXZ := ElbowF([
    FiExitCoupling2_origin[0];
    FiExitCoupling2_origin[1];
    (Fi_origin[2] + outerradius(ND_FiBwManBranch) + H_FiBottomLayer) + ElbowRadius(ND_FiTrunk)
], [0; 0; -90]*deg, ND_FiTrunk, PS_Default)
FiOut3ElbowXY :=
    if EN_DoubleTrain == 0
        ElbowF([
            FiExitCoupling2_origin[0];
            FiExitCoupling0_origin[1] - ElbowRadius(ND_FiTrunk);
            Fi_origin[2] + outerradius(ND_FiBwManBranch) + H_FiBottomLayer
        ], [0; 0; 0]*deg, ND_FiTrunk, PS_Default)
    otherwise
        ElbowF([
            FiExitCoupling2_origin[0] - ElbowRadius(ND_FiTrunk) + L_FiOut3PipeX;
            FiExitCoupling2_origin[1];
            Fi_origin[2] + outerradius(ND_FiBwManBranch) + H_FiBottomLayer
        ], [90; 0; 0]*deg, ND_FiTrunk, PS_Default)
FiOut3Tee :=
    if EN_DoubleTrain == 0
        TeeF([
            FiExitCoupling2_origin[0] - ElbowRadius(ND_FiTrunk) - L_FiOut3PipeX - TeeLength(ND_FiTrunk)/2;
            FiExitCoupling0_origin[1] + ShortTeeLength(ND_FiTrunk)*cos(AN_FiTrunkValves);
            Fi_origin[2] + outerradius(ND_FiBwManBranch) + H_FiBottomLayer - ShortTeeLength(ND_FiTrunk)*sin(AN_FiTrunkValves)
        ], [0 deg; 0 deg; -AN_FiTrunkValves], ND_FiTrunk, PS_Default)
    otherwise
        TeeF([
            FiExitCoupling2_origin[0] - ElbowRadius(ND_FiTrunk) + ShortTeeLength(ND_FiTrunk)*cos(AN_FiTrunkValves);
            FiExitCoupling2_origin[1] - L_FiOut3PipeX - TeeLength(ND_FiTrunk)/2;
            Fi_origin[2] + outerradius(ND_FiBwManBranch) + H_FiBottomLayer - ShortTeeLength(ND_FiTrunk)*sin(AN_FiTrunkValves)
        ], [90 deg; -AN_FiTrunkValves; 0 deg], ND_FiTrunk, PS_Default)
FiOut3FittingScript :=
    stack(FiExChanCoupling3, FiOut3ElbowYZ, FiOut3ElbowXY, FiOut3Tee, FiEntExitFittingFrz) if EN_DoubleTrain == 0
    stack(FiExChanCoupling3, FiOut3ElbowXZ, FiOut3ElbowXY, FiOut3Tee, FiEntExitFittingFrz) otherwise
here
# Outlet 3 Valve
FiOutSmallPipe3 :=
    if EN_DoubleTrain == 0
        PipeF([
            FiExitCoupling2_origin[0] - ElbowRadius(ND_FiTrunk) - L_FiOut3PipeX - TeeLength(ND_FiTrunk)/2;
            FiExitCoupling0_origin[1] + ShortTeeLength(ND_FiTrunk)*cos(AN_FiTrunkValves);
            Fi_origin[2] + outerradius(ND_FiBwManBranch) + H_FiBottomLayer - ShortTeeLength(ND_FiTrunk)*sin(AN_FiTrunkValves)
        ], 2*SocketDepth(ND_FiTrunk), [-90 deg; 0 deg; 0 deg], ND_FiTrunk, PS_Default)
    otherwise
        PipeF([
            FiExitCoupling2_origin[0] - ElbowRadius(ND_FiTrunk) + ShortTeeLength(ND_FiTrunk)*cos(AN_FiTrunkValves);
            FiExitCoupling2_origin[1] - L_FiOut3PipeX - TeeLength(ND_FiTrunk)/2;
            Fi_origin[2] + outerradius(ND_FiBwManBranch) + H_FiBottomLayer - ShortTeeLength(ND_FiTrunk)*sin(AN_FiTrunkValves)
        ], 2*SocketDepth(ND_FiTrunk), [0 deg; 0 deg; 0 deg], ND_FiTrunk, PS_Default)
FiOut3SmallPipeRotate :=
    if EN_DoubleTrain == 0
        Rotate3DLast([
            FiExitCoupling2_origin[0] - ElbowRadius(ND_FiTrunk) - L_FiOut3PipeX - TeeLength(ND_FiTrunk)/2;
            FiExitCoupling0_origin[1] + ShortTeeLength(ND_FiTrunk)*cos(AN_FiTrunkValves);
            Fi_origin[2] + outerradius(ND_FiBwManBranch) + H_FiBottomLayer - ShortTeeLength(ND_FiTrunk)*sin(AN_FiTrunkValves)
        ], "x", -AN_FiTrunkValves)
    otherwise
        Rotate3DLast([
            FiExitCoupling2_origin[0] - ElbowRadius(ND_FiTrunk) + ShortTeeLength(ND_FiTrunk)*cos(AN_FiTrunkValves);
            FiExitCoupling2_origin[1] - L_FiOut3PipeX - TeeLength(ND_FiTrunk)/2;
            Fi_origin[2] + outerradius(ND_FiBwManBranch) + H_FiBottomLayer - ShortTeeLength(ND_FiTrunk)*sin(AN_FiTrunkValves)
        ], "y", -AN_FiTrunkValves)
FiOutValve3 :=
    if EN_DoubleTrain == 0
        insertdwg("https://confluence.cornell.edu/download/attachments/173604905/Sed-Scaled-Gate-Valve-Threaded.dwg", [
            FiExitCoupling2_origin[0] - ElbowRadius(ND_FiTrunk) - L_FiOut3PipeX - TeeLength(ND_FiTrunk)/2;
            FiExitCoupling0_origin[1] + (ShortTeeLength(ND_FiTrunk) + 2*SocketDepth(ND_FiTrunk))*cos(AN_FiTrunkValves);
            Fi_origin[2] + outerradius(ND_FiBwManBranch) + H_FiBottomLayer - (ShortTeeLength(ND_FiTrunk) + 2*SocketDepth(ND_FiTrunk))*sin(AN_FiTrunkValves)
        ], 2*outerradius(ND_FiTrunk)/(1.16 m), 2*outerradius(ND_FiTrunk)/(1.16 m), -90 deg)
    otherwise
        insertdwg("https://confluence.cornell.edu/download/attachments/173604905/Sed-Scaled-Gate-Valve-Threaded.dwg", [
            FiExitCoupling2_origin[0] - ElbowRadius(ND_FiTrunk) + (ShortTeeLength(ND_FiTrunk) + 2*SocketDepth(ND_FiTrunk))*cos(AN_FiTrunkValves);
            FiExitCoupling2_origin[1] - L_FiOut3PipeX - TeeLength(ND_FiTrunk)/2;
            Fi_origin[2] + outerradius(ND_FiBwManBranch) + H_FiBottomLayer - (ShortTeeLength(ND_FiTrunk) + 2*SocketDepth(ND_FiTrunk))*sin(AN_FiTrunkValves)
        ], 2*outerradius(ND_FiTrunk)/(1.16 m), 2*outerradius(ND_FiTrunk)/(1.16 m), 0 deg)
FiOut3ValveRotate :=
    if EN_DoubleTrain == 0
        Rotate3DLast([
            FiExitCoupling2_origin[0] - ElbowRadius(ND_FiTrunk) - L_FiOut3PipeX - TeeLength(ND_FiTrunk)/2;
            FiExitCoupling0_origin[1] + (ShortTeeLength(ND_FiTrunk) + 2*SocketDepth(ND_FiTrunk))*cos(AN_FiTrunkValves);
            Fi_origin[2] + outerradius(ND_FiBwManBranch) + H_FiBottomLayer - ShortTeeLength(ND_FiTrunk)*sin(AN_FiTrunkValves)
        ], "x", -AN_FiTrunkValves)
    otherwise
        Rotate3DLast([
            FiExitCoupling2_origin[0] - ElbowRadius(ND_FiTrunk) + (ShortTeeLength(ND_FiTrunk) + 2*SocketDepth(ND_FiTrunk))*cos(AN_FiTrunkValves);
            FiExitCoupling2_origin[1] - L_FiOut3PipeX - TeeLength(ND_FiTrunk)/2;
            Fi_origin[2] + outerradius(ND_FiBwManBranch) + H_FiBottomLayer - ShortTeeLength(ND_FiTrunk)*sin(AN_FiTrunkValves)
        ], "y", -AN_FiTrunkValves)
FiSmallPipeScript := stack(FiSmallPipeScript, FiOutSmallPipe3, FiOut3SmallPipeRotate, FiSmallPipeFrz)
FiValveScript := stack(FiValveScript, FiOutValve3, FiOut3ValveRotate, FiEntExitValveFrz)
# Inlet/Outlet Stubs
FiRemovableLayer := layer_new("FiRemovablePlu", red)
L_FiEntPipeStub := Z_FiEntranceStub - Z_FiEntranceBottom + SocketDepth(ND_FiTrunk)
L_FiExitPipeStub := Z_FiExitStub - Z_FiExitBottom + SocketDepth(ND_FiTrunk)
L_ExitBoxDrainStub := H_FiExit + SocketDepth(ND_FiExitWaste)
FiEnt1PipeStub := PipeF(FiInletCoupling1_origin + [0 m; 0 m; CouplingLength(ND_FiTrunk) - 2*SocketDepth(ND_FiTrunk)], L_FiEntPipeStub, [0; 90]*deg, ND_FiTrunk, PS_Default)
FiEnt2PipeStub := PipeF(FiInletCoupling2_origin + [0 m; 0 m; CouplingLength(ND_FiTrunk) - 2*SocketDepth(ND_FiTrunk)], L_FiEntPipeStub, [0; 90]*deg, ND_FiTrunk, PS_Default)
FiEnt3PipeStub := PipeF(FiInletCoupling3_origin + [0 m; 0 m; CouplingLength(ND_FiTrunk) - 2*SocketDepth(ND_FiTrunk)], L_FiEntPipeStub, [0; 90]*deg, ND_FiTrunk, PS_Default)
FiExit0PipeStub := PipeF(FiExitCoupling0_origin + [0 m; 0 m; CouplingLength(ND_FiTrunk) - 2*SocketDepth(ND_FiTrunk)], L_FiExitPipeStub, [0; 90]*deg, ND_FiTrunk, PS_Default)
FiExit1PipeStub := PipeF(FiExitCoupling1_origin + [0 m; 0 m; CouplingLength(ND_FiTrunk) - 2*SocketDepth(ND_FiTrunk)], L_FiExitPipeStub, [0; 90]*deg, ND_FiTrunk, PS_Default)
FiExit2PipeStub := PipeF(FiExitCoupling3_origin + [0 m; 0 m; CouplingLength(ND_FiExitWaste) - 2*SocketDepth(ND_FiExitWaste)], L_ExitBoxDrainStub, [0; 90]*deg, ND_FiExitWaste, PS_Default)
FiOut3PipeStub := PipeF([
    FiExitCoupling2_origin[0];
    FiExitCoupling2_origin[1];
    FiExitCoupling2_origin[2] + CouplingLength(ND_FiTrunk) - 2*SocketDepth(ND_FiTrunk)
], L_FiExitPipeStub, [0; 90]*deg, ND_FiTrunk, PS_Default)
FiRemovableFrz := FreezeLayer("FiRemovablePlu")
FiEntExitStubs := stack(FiRemovableLayer, FiEnt1PipeStub, FiEnt2PipeStub, FiEnt3PipeStub, FiExit0PipeStub, FiExit1PipeStub, FiExit2PipeStub, FiOut3PipeStub, FiRemovableFrz)
FiEntExitPipingScript := stack(FiSmallPipeScript, FiIn0PipeScript, FiIn1PipeScript, FiIn2PipeScript, FiIn3PipeScript, FiOut0PipeScript, FiOut1PipeScript, FiOut2PipeScript, FiOut3PipeScript)
FiEntExitFittingScript := stack(FiIn0FittingScript, FiIn1FittingScript, FiIn2FittingScript, FiIn3FittingScript, FiOut0FittingScript, FiOut1FittingScript, FiOut2FittingScript, FiOut3FittingScript)
FiEntExitPlumbingScript := stack(FiEntExitPipingScript, FiEntExitFittingScript, FiEntExitStubs)
FiAuxScript := stack(FiAuxBoxScript, FiAuxPlumbingScript, FiEntExitPlumbingScript)
# Sand Drain
# Location changed 7/9/2014 by mrf222
H_FiSandOutlet = 1 m
# this all needs to be updated to a wye at some point
FiSandDrainPipe_Origin := Fi_origin + {
    if EN_DoubleTrain == 0
        [
            -ConRadius(ND_FiSandOutlet);
            W_Fi - ConRadius(ND_FiSandOutlet) - S_Fitting;
            2*ConRadius(ND_FiBwManBranch) + 5.5*H_FiLayer - H_FiSandOutlet
        ]
    otherwise
        [
            (-W_Fi + ConRadius(ND_FiSandOutlet)) + S_Fitting;
            -ConRadius(ND_FiSandOutlet);
            2*ConRadius(ND_FiBwManBranch) + 5.5*H_FiLayer - H_FiSandOutlet
        ]
}
# Currently exits between the 6th and 7th sand layers, but it probably does not expend far enough down! See design code for calculations of headloss.
L_FiSandDrainPipeVert := H_FiSandOutlet - TeeLength(ND_FiSandOutlet)/2
FiSandDrainTee_Origin := FiSandDrainPipe_Origin + {
    [ShortTeeLength(ND_FiSandOutlet); 0 m; TeeLength(ND_FiSandOutlet)/2 + L_FiSandDrainPipeVert] if EN_DoubleTrain == 0
    otherwise
        [
            -W_Fi/2 - ConRadius(ND_FiBwTrunk) - S_Fitting;
            0 m;
            TeeLength(ND_FiSandOutlet)/2 + L_FiSandDrainPipeVert
        ]
}
L_FiSandDrainHorizPipe := T_FiWall + 2*SocketDepth(ND_FiSandOutlet)
FiSandDrainHorizPipe_Origin := FiSandDrainTee_Origin
L_FiSandDrainShortPipe := 2*SocketDepth(ND_FiSandOutlet)
FiSandDrainShortPipe1_Origin := FiSandDrainPipe_Origin + [0 m; 0 m; L_FiSandDrainPipeVert + TeeLength(ND_FiSandOutlet)]
FiSandDrainElbow_Origin := FiSandDrainHorizPipe_Origin + {
    [L_FiSandDrainHorizPipe; 0 m; 0 m] if EN_DoubleTrain == 0
    [0 m; L_FiSandDrainHorizPipe; 0 m] otherwise
}
FiSandDrainShortPipe2_Origin := FiSandDrainElbow_Origin + {
    [ElbowRadius(ND_FiSandOutlet); 0 m; -ElbowRadius(ND_FiSandOutlet)] if EN_DoubleTrain == 0
    [0 m; ElbowRadius(ND_FiSandOutlet); -ElbowRadius(ND_FiSandOutlet)] otherwise
}
DrawFiSandDrainPipeVert := PipeF(FiSandDrainPipe_Origin, L_FiSandDrainPipeVert, [0; 90]*deg, ND_FiSandOutlet, PS_Default)
DrawFiSandDrainPipeShort1 := PipeF(FiSandDrainShortPipe1_Origin, L_FiSandDrainShortPipe, [0; 90]*deg, ND_FiSandOutlet, PS_Default)
DrawFiSandDrainHorizPipe :=
    PipeSUBF(FiSandDrainHorizPipe_Origin, L_FiSandDrainHorizPipe, [180; 0; 0]*deg, ND_FiSandOutlet, PS_Default, ["FiTankCon"]) if EN_DoubleTrain == 0
    PipeSUBF(FiSandDrainHorizPipe_Origin, L_FiSandDrainHorizPipe, [90; -90; 0]*deg, ND_FiSandOutlet, PS_Default, ["FiTankCon"]) otherwise
# unsure of angle for the double train case!
DrawFiSandDrainPipeShort2 := PipeF(FiSandDrainShortPipe2_Origin, L_FiSandDrainShortPipe, [0; -90]*deg, ND_FiSandOutlet, PS_Default)
# Are we keeping this? Unsure.
DrawFiOutletCap := CapF([
    0;
    0;
    L_FiSandDrainPipeVert + TeeLength(ND_FiSandOutlet) + SocketDepth(ND_FiSandOutlet) + CapHeight(ND_FiSandOutlet)
] + FiSandDrainPipe_Origin, [0; 270]*deg, ND_FiSandOutlet)
BlockHelp2 := BoxF(FiSandDrainShortPipe2_Origin - [0; 0; L_FiSandDrainShortPipe], FiSandDrainShortPipe2_Origin - [-tiny; -tiny; L_FiSandDrainShortPipe - tiny], [0; 0; 0]*deg)
DrawFiSandOutletValve := insertdwg("https://confluence.cornell.edu/download/attachments/173604905/Fi-Scaled-Gate-Valve-Threaded.dwg", FiSandDrainShortPipe2_Origin - [0; 0; L_FiSandDrainShortPipe], 2*outerradius(ND_FiSandOutlet)/(1.16 m), 2*outerradius(ND_FiSandOutlet)/(1.16 m), 180 deg)
FiSandOutletValveRotate := Rotate3DLast(FiSandDrainShortPipe2_Origin - [0; 0; L_FiSandDrainShortPipe], "y", -90)
FiSandDrainOutletValveLayer := layer_new("FiSandDrainOutletValve", black)
FiSandDrainOutletValveFreeze := FreezeLayer("FiSandDrainOutletValve")
FiSandDrainOutletValveScript := stack(FiSandDrainOutletValveLayer, DrawFiSandOutletValve, BlockHelp2, FiSandOutletValveRotate, FiSandDrainOutletValveFreeze)
DrawFiSandDrainTee :=
    TeeSUBF(FiSandDrainTee_Origin, [-90; 0; 90]*deg, ND_FiSandOutlet, PS_Default, ["FiTankCon"]) if EN_DoubleTrain == 0
    TeeSUBF(FiSandDrainTee_Origin, [0; -90; 90]*deg, ND_FiSandOutlet, PS_Default, ["FiTankCon"]) otherwise
DrawFiSandDrainElbow :=
    ElbowSUBF(FiSandDrainElbow_Origin, [-90; 0; -90]*deg, ND_FiSandOutlet, PS_Default, ["FiTankCon"]) if EN_DoubleTrain == 0
    ElbowSUBF(FiSandDrainElbow_Origin, [180; 90; -90]*deg, ND_FiSandOutlet, PS_Default, ["FiTankCon"]) otherwise  # unsure of angle in double train case!
FiSandDrainPipeLayer := layer_new("FiSandDrainPlu", blue)
FiSandDrainFrz := FreezeLayer("FiSandDrainPlu")
FiSandDrainFittingLayer := layer_new("FiSandDrainFittings", green)
FiSandDrainFittingsFrz := FreezeLayer("FiSandDrainFittings")
FiSandDrainFittingScript := stack(FiSandDrainFittingLayer, DrawFiSandDrainTee, DrawFiSandDrainElbow, FiSandDrainFittingsFrz)
FiSandDrainScript := stack(FiSandDrainPipeLayer, DrawFiSandDrainPipeVert, DrawFiSandDrainPipeShort1, DrawFiSandDrainHorizPipe, DrawFiSandDrainPipeShort2, DrawFiOutletCap, FiSandDrainFrz, FiSandDrainFittingScript, FiSandDrainOutletValveScript)
# Backwash Siphon
L_FiSiphonPipeBottom :=
    (W_PlantDC/2 + FiInletChannel_Origin[0] - (Fi_origin[0] + T_FiWall + SocketDepth(ND_FiSiphon) + ShortTeeLength(ND_FiSiphon) + ElbowRadius(ND_FiSiphon)) - ElbowRadius(ND_FiSiphon)) if EN_DoubleTrain == 0
    (W_PlantDC/2 + FiInletChannel_Origin[1] + W_FiInletChannel - (Fi_origin[1] + L_Fi + T_FiWall + SocketDepth(ND_FiSiphon) + ShortTeeLength(ND_FiSiphon) + ElbowRadius(ND_FiSiphon)) - ElbowRadius(ND_FiSiphon)) otherwise
    = 3.01298 m
X_FiSiphonPipe1End := Fi_origin[0] + T_FiWall - CouplingLength(ND_FiSiphon) + SocketDepth(ND_FiSiphon) - max((T_FiWall - CouplingLength(ND_FiSiphon)) + 2*SocketDepth(ND_FiSiphon), 2*SocketDepth(ND_FiSiphon))
X_FiSiphonManifoldStart := X_FiSiphonPipe1End - ElbowRadius(ND_FiSiphon) - ShortTeeLength(ND_FiSiphon)
X_FiSiphonManifoldEnd := Fi_origin[0] - L_Fi
Y_FiSiphonPipe1End := Fi_origin[1] + L_Fi + T_FiWall - CouplingLength(ND_FiSiphon) + SocketDepth(ND_FiSiphon) - max((T_FiWall - CouplingLength(ND_FiSiphon)) + 2*SocketDepth(ND_FiSiphon), 2*SocketDepth(ND_FiSiphon))
Y_FiSiphonManifoldStart := Y_FiSiphonPipe1End - ElbowRadius(ND_FiSiphon) - ShortTeeLength(ND_FiSiphon)
Y_FiSiphonManifoldEnd := Fi_origin[1]
# Siphon Fittings Other than Drain Channel Coupling
FiSiphonCoupling :=
    if EN_DoubleTrain == 0
        CouplingSUBF([
            Fi_origin[0] + T_FiWall - SocketDepth(ND_FiSiphon);
            Fi_origin[1] + S_Fitting + ConRadius(ND_FiSiphon);
            Z_FiSiphonCoupling
        ], [0; 0]*deg, ND_FiSiphon, PS_Default, ["FiTankCon"])
    otherwise
        CouplingSUBF([
            Fi_origin[0] - S_Fitting - ConRadius(ND_FiSiphon);
            Fi_origin[1] + L_Fi + T_FiWall - SocketDepth(ND_FiSiphon);
            Z_FiSiphonCoupling
        ], [90; 0]*deg, ND_FiSiphon, PS_Default, ["FiTankCon"])
FiSiphonTee :=
    if EN_DoubleTrain == 0
        TeeF([
            Fi_origin[0] - L_Fi/2;
            Fi_origin[1] + S_Fitting + ConRadius(ND_FiSiphon);
            Z_FiSiphonInlet - outerradius(ND_FiSiphon) + ShortTeeLength(ND_FiSiphon)
        ], [0; 0; 90]*deg, ND_FiSiphon, PS_Default)
    otherwise
        TeeF([
            Fi_origin[0] - S_Fitting - ConRadius(ND_FiSiphon);
            Fi_origin[1] + L_Fi/2;
            Z_FiSiphonInlet - outerradius(ND_FiSiphon) + ShortTeeLength(ND_FiSiphon)
        ], [0; 90; 90]*deg, ND_FiSiphon, PS_Default)
FiSiphonElbow1 :=
    if EN_DoubleTrain == 0
        ElbowF([
            Fi_origin[0] - L_Fi/2 + ElbowRadius(ND_FiSiphon);
            Fi_origin[1] + S_Fitting + ConRadius(ND_FiSiphon);
            Z_FiSiphonCoupling
        ], [90; 0; 90]*deg, ND_FiSiphon, PS_Default)
    otherwise
        ElbowF([
            Fi_origin[0] - S_Fitting - ConRadius(ND_FiSiphon);
            Fi_origin[1] + L_Fi/2 + ElbowRadius(ND_FiSiphon);
            Z_FiSiphonCoupling
        ], [90; 90; 90]*deg, ND_FiSiphon, PS_Default)
FiSiphonManifoldCap1 :=
    if EN_DoubleTrain == 0
        CapF([
            X_FiSiphonManifoldEnd + ConRadius(ND_FiSiphon) - outerradius(ND_FiSiphon);
            Fi_origin[1] + S_Fitting + ConRadius(ND_FiSiphon);
            Z_FiSiphonInlet - outerradius(ND_FiSiphon)
        ], [180; 0]*deg, ND_FiSiphon)
    otherwise
        CapF([
            Fi_origin[0] - S_Fitting - ConRadius(ND_FiSiphon);
            Y_FiSiphonManifoldEnd + ConRadius(ND_FiSiphon) - outerradius(ND_FiSiphon);
            Z_FiSiphonInlet - outerradius(ND_FiSiphon)
        ], [-90; 0]*deg, ND_FiSiphon)
FiSiphonManifoldCap2 :=
    if EN_DoubleTrain == 0
        CapF([
            Fi_origin[0] - ConRadius(ND_FiSiphon) + outerradius(ND_FiSiphon);
            Fi_origin[1] + S_Fitting + ConRadius(ND_FiSiphon);
            Z_FiSiphonInlet - outerradius(ND_FiSiphon)
        ], [0; 0]*deg, ND_FiSiphon)
    otherwise
        CapF([
            Fi_origin[0] - S_Fitting - ConRadius(ND_FiSiphon);
            Fi_origin[1] + L_Fi - ConRadius(ND_FiSiphon) + outerradius(ND_FiSiphon);
            Z_FiSiphonInlet - outerradius(ND_FiSiphon)
        ], [90; 0]*deg, ND_FiSiphon)
FiSiphonTee2_Origin :=
    if EN_DoubleTrain == 0
        [
            Fi_origin[0] + T_FiWall + SocketDepth(ND_FiSiphon);
            Fi_origin[1] + S_Fitting + ConRadius(ND_FiSiphon);
            Z_FiSiphonCoupling
        ]
    otherwise
        [
            Fi_origin[0] - S_Fitting - ConRadius(ND_FiSiphon);
            Fi_origin[1] + L_Fi + T_FiWall + SocketDepth(ND_FiSiphon);
            Z_FiSiphonCoupling
        ]
FiSiphonTee2 := TeeF(FiSiphonTee2_Origin, [
    90;
    {
        0 if EN_DoubleTrain == 0
        90 otherwise
    };
    90
]*deg, ND_FiSiphon, PS_Default)
FiSiphonElbow0 :=
    if EN_DoubleTrain == 0
        ElbowF([
            Fi_origin[0] + T_FiWall + SocketDepth(ND_FiSiphon) + ShortTeeLength(ND_FiSiphon) + ElbowRadius(ND_FiSiphon);
            Fi_origin[1] + S_Fitting + ConRadius(ND_FiSiphon);
            Fi_origin[2]
        ], [90; 0; 270]*deg, ND_FiSiphon, PS_Default)
    otherwise
        ElbowF([
            Fi_origin[0] - S_Fitting - ConRadius(ND_FiSiphon);
            Fi_origin[1] + T_FiWall + L_Fi + SocketDepth(ND_FiSiphon) + ShortTeeLength(ND_FiSiphon) + ElbowRadius(ND_FiSiphon);
            Fi_origin[2]
        ], [90; -90; 270]*deg, ND_FiSiphon, PS_Default)
FiSiphonElbow01 :=
    if EN_DoubleTrain == 0
        ElbowF([
            Fi_origin[0] + T_FiWall + SocketDepth(ND_FiSiphon) + ShortTeeLength(ND_FiSiphon) + ElbowRadius(ND_FiSiphon) + L_FiSiphonPipeBottom;
            Fi_origin[1] + S_Fitting + ConRadius(ND_FiSiphon);
            Fi_origin[2]
        ], [270; 0; 90]*deg, ND_FiSiphon, PS_Default)
    otherwise
        ElbowF([
            Fi_origin[0] - S_Fitting - ConRadius(ND_FiSiphon);
            Fi_origin[1] + L_Fi + T_FiWall + SocketDepth(ND_FiSiphon) + ShortTeeLength(ND_FiSiphon) + ElbowRadius(ND_FiSiphon) + L_FiSiphonPipeBottom;
            Fi_origin[2]
        ], [270; 90; 90]*deg, ND_FiSiphon, PS_Default)
SelectFiFerncos := SelectLayer("FiFerncoCouplingsPlu")
FiSiphonFernco :=
    FerncoCouplingF([Fi_origin[0]; Fi_origin[1] + S_Fitting + ConRadius(ND_FiSiphon); Z_FiSiphonCoupling], [0; 0; 0]*deg, ND_FiSiphon, L_FiManFerncoCoupling) if EN_DoubleTrain == 0
    FerncoCouplingF([Fi_origin[0] - S_Fitting - ConRadius(ND_FiSiphon); Fi_origin[1] + L_Fi; Z_FiSiphonCoupling], [90; 0; 0]*deg, ND_FiSiphon, L_FiManFerncoCoupling) otherwise
FiSiphonFittingLayer := layer_new("FiSiphonFitting", green)
FiSiphonFittingSelect := SelectLayer("FiSiphonFitting")
FiSiphonFittingFrz := FreezeLayer("FiSiphonFitting")
FiSiphonFittingScript := stack(FiSiphonFittingLayer, FiSiphonCoupling, FiSiphonTee, FiSiphonElbow1, FiSiphonManifoldCap1, FiSiphonManifoldCap2, FiSiphonTee2, FiSiphonElbow0, FiSiphonElbow01, FiSiphonFittingFrz, SelectFiFerncos, FiSiphonFernco, LayerFiFerncoFreeze)
# Siphon Pipes Up Until Drain Channel
L_FiSiphonManifold := L_Fi/2 - ShortTeeLength(ND_FiSiphon) - ConRadius(ND_FiSiphon) + outerradius(ND_FiSiphon) = 0.403865 m
L_FiSiphonPipe1a := T_FiWall - CouplingLength(ND_FiSiphon) + SocketDepth(ND_FiSiphon) + L_FiManFerncoCoupling/2 = 0.15824 m
L_FiSiphonPipe1b := L_Fi/2 - ElbowRadius(ND_FiSiphon) - L_FiManFerncoCoupling/2 = 0.492609 m
L_FiSiphonPipe2 := Z_FiSiphonCoupling - ElbowRadius(ND_FiSiphon) - (Z_FiSiphonInlet - outerradius(ND_FiSiphon) + ShortTeeLength(ND_FiSiphon)) = 1.57094 m
L_FiSiphonPipe3 := 2*SocketDepth(ND_FiSiphon)
L_FiSiphonPipe4 := Z_FiSiphonCoupling - ElbowRadius(ND_FiSiphon) - ShortTeeLength(ND_FiSiphon) - Fi_origin[2]
FiSiphonPipe2 := PipeF({
    if EN_DoubleTrain == 0
        [
            Fi_origin[0] - L_Fi/2;
            Fi_origin[1] + S_Fitting + ConRadius(ND_FiSiphon);
            Z_FiSiphonCoupling - ElbowRadius(ND_FiSiphon)
        ]
    otherwise
        [
            Fi_origin[0] - S_Fitting - ConRadius(ND_FiSiphon);
            Fi_origin[1] + L_Fi/2;
            Z_FiSiphonCoupling - ElbowRadius(ND_FiSiphon)
        ]
}, L_FiSiphonPipe2, [0; -90]*deg, ND_FiSiphon, PS_Default)
FiSiphonManifold1 :=
    if EN_DoubleTrain == 0
        PipeF([
            Fi_origin[0] - L_Fi/2 - ShortTeeLength(ND_FiSiphon);
            Fi_origin[1] + S_Fitting + ConRadius(ND_FiSiphon);
            Z_FiSiphonInlet - outerradius(ND_FiSiphon)
        ], L_Fi/2 - ShortTeeLength(ND_FiSiphon) - ConRadius(ND_FiSiphon) + outerradius(ND_FiSiphon), [0; 0]*deg, ND_FiSiphon, PS_Default)
    otherwise
        PipeF([
            Fi_origin[0] - S_Fitting - ConRadius(ND_FiSiphon);
            Fi_origin[1] + L_Fi/2 - ShortTeeLength(ND_FiSiphon);
            Z_FiSiphonInlet - outerradius(ND_FiSiphon)
        ], L_Fi/2 - ShortTeeLength(ND_FiSiphon) - ConRadius(ND_FiSiphon) + outerradius(ND_FiSiphon), [90; 0]*deg, ND_FiSiphon, PS_Default)
FiSiphonManifold2 :=
    if EN_DoubleTrain == 0
        PipeF([
            Fi_origin[0] - ConRadius(ND_FiSiphon) + outerradius(ND_FiSiphon);
            Fi_origin[1] + S_Fitting + ConRadius(ND_FiSiphon);
            Z_FiSiphonInlet - outerradius(ND_FiSiphon)
        ], L_Fi/2 - ShortTeeLength(ND_FiSiphon) - ConRadius(ND_FiSiphon) + outerradius(ND_FiSiphon), [0; 0]*deg, ND_FiSiphon, PS_Default)
    otherwise
        PipeF([
            Fi_origin[0] - S_Fitting - ConRadius(ND_FiSiphon);
            Fi_origin[1] + L_Fi - ConRadius(ND_FiSiphon) + outerradius(ND_FiSiphon);
            Z_FiSiphonInlet - outerradius(ND_FiSiphon)
        ], L_Fi/2 - ShortTeeLength(ND_FiSiphon) - ConRadius(ND_FiSiphon) + outerradius(ND_FiSiphon), [90; 0]*deg, ND_FiSiphon, PS_Default)
FiSiphonPipe3 :=
    if EN_DoubleTrain == 0
        PipeF([
            Fi_origin[0] + T_FiWall - SocketDepth(ND_FiSiphon);
            Fi_origin[1] + S_Fitting + ConRadius(ND_FiSiphon);
            Z_FiSiphonCoupling
        ], L_FiSiphonPipe3, [180; 0]*deg, ND_FiSiphon, PS_Default)
    otherwise
        PipeF([
            Fi_origin[0] - S_Fitting - ConRadius(ND_FiSiphon);
            Fi_origin[1] + L_Fi + T_FiWall - SocketDepth(ND_FiSiphon);
            Z_FiSiphonCoupling
        ], L_FiSiphonPipe3, [-90; 0]*deg, ND_FiSiphon, PS_Default)
FiSiphonPipe4 :=
    if EN_DoubleTrain == 0
        PipeF([
            Fi_origin[0] + T_FiWall + SocketDepth(ND_FiSiphon) + ShortTeeLength(ND_FiSiphon);
            Fi_origin[1] + S_Fitting + ConRadius(ND_FiSiphon);
            Z_FiSiphonCoupling - ShortTeeLength(ND_FiSiphon)
        ], L_FiSiphonPipe4, [0; -90]*deg, ND_FiSiphon, PS_Default)
    otherwise
        PipeF([
            Fi_origin[0] - S_Fitting - ConRadius(ND_FiSiphon);
            Fi_origin[1] + L_Fi + T_FiWall + SocketDepth(ND_FiSiphon) + ShortTeeLength(ND_FiSiphon);
            Z_FiSiphonCoupling - ShortTeeLength(ND_FiSiphon)
        ], L_FiSiphonPipe4, [0; -90]*deg, ND_FiSiphon, PS_Default)
FiSiphonPipe5 :=
    if EN_DoubleTrain == 0
        PipeF([
            Fi_origin[0] + T_FiWall + SocketDepth(ND_FiSiphon) + ShortTeeLength(ND_FiSiphon) + ElbowRadius(ND_FiSiphon) + L_FiSiphonPipeBottom;
            Fi_origin[1] + S_Fitting + ConRadius(ND_FiSiphon);
            Fi_origin[2]
        ], L_FiSiphonPipeBottom, [0; 0], ND_FiSiphon, PS_Default)
    otherwise
        PipeF([
            Fi_origin[0] - S_Fitting - ConRadius(ND_FiSiphon);
            Fi_origin[1] + L_Fi + T_FiWall + SocketDepth(ND_FiSiphon) + ShortTeeLength(ND_FiSiphon) + ElbowRadius(ND_FiSiphon) + L_FiSiphonPipeBottom;
            Fi_origin[2]
        ], L_FiSiphonPipeBottom, [90; 0]*deg, ND_FiSiphon, PS_Default)
FiSiphonPipeLayer := layer_new("FiSiphonPipe", blue)
FiSiphonPipeSelect := SelectLayer("FiSiphonPipe")
FiSiphonPipeFrz := FreezeLayer("FiSiphonPipe")
FiSiphonPipeScript := stack(FiSiphonPipeLayer, FiSiphonPipe2, FiSiphonManifold1, FiSiphonManifold2, FiSiphonPipe3, FiSiphonPipe4, FiSiphonPipe5, FiSiphonPipeFrz)
# Siphon Manifold Orifices
FirstFiSiphonManOrifice := CylinderF({
    if EN_DoubleTrain == 0
        [
            Fi_origin[0] - B_FiSiphonManOrifices/2 - ConRadius(ND_FiSiphon) + outerradius(ND_FiSiphon);
            Fi_origin[1] + S_Fitting + ConRadius(ND_FiSiphon);
            Z_FiSiphonInlet - outerradius(ND_FiSiphon)
        ]
    otherwise
        [
            Fi_origin[0] - S_Fitting - ConRadius(ND_FiSiphon);
            Fi_origin[1] + L_Fi - B_FiSiphonManOrifices/2 - ConRadius(ND_FiSiphon) + outerradius(ND_FiSiphon);
            Z_FiSiphonInlet - outerradius(ND_FiSiphon)
        ]
}, D_FiSiphonManOrifices/2, 1.2*ConRadius(ND_FiSiphon), [0; 90]*deg)
ArrayFiSiphonManOrifices :=
    array_all(1, N_FiSiphonManOrifices/2, -B_FiSiphonManOrifices) if EN_DoubleTrain == 0
    array_all(N_FiSiphonManOrifices/2, 1, -B_FiSiphonManOrifices) otherwise
MirrorFiSiphonManOrifices :=
    Mirror3dAll("yz", [Fi_origin[0] - L_Fi/2; 0 m], "n") if EN_DoubleTrain == 0
    Mirror3dAll("zx", [0 m; Fi_origin[1] + L_Fi/2], "n") otherwise
FiSiphonOrificeLayer := layer_new("FiSiphonOrifice", green)
FiSiphonOrificeSelect := SelectLayer("FiSiphonOrifice")
FiSiphonOrificeFrz := FreezeLayer("FiSiphonOrifice")
FiSiphonOrifices := stack(FiSiphonOrificeLayer, FirstFiSiphonManOrifice, ArrayFiSiphonManOrifices, MirrorFiSiphonManOrifices)
SubtractFiSiphonOrificesPipe := SubtractF(["FiPipePlu"], "DeleteMe")
FiSiphonPipe1a :=
    if EN_DoubleTrain == 0
        PipeSUBF([
            Fi_origin[0] + T_FiWall - CouplingLength(ND_FiSiphon) + SocketDepth(ND_FiSiphon);
            Fi_origin[1] + S_Fitting + ConRadius(ND_FiSiphon);
            Z_FiSiphonCoupling
        ], L_FiSiphonPipe1a, [0; 0]*deg, ND_FiSiphon, PS_Default, ["FiTankCon"])
    otherwise
        PipeSUBF([
            Fi_origin[0] - S_Fitting - ConRadius(ND_FiSiphon);
            Fi_origin[1] + L_Fi + T_FiWall - CouplingLength(ND_FiSiphon) + SocketDepth(ND_FiSiphon);
            Z_FiSiphonCoupling
        ], L_FiSiphonPipe1a, [90; 0]*deg, ND_FiSiphon, PS_Default, ["FiTankCon"])
# these need to be stacked after the orifices, otherwise the pipes effectively union after the subtraction
FiSiphonPipe1b :=
    if EN_DoubleTrain == 0
        PipeF([
            Fi_origin[0] - L_FiManFerncoCoupling/2;
            Fi_origin[1] + S_Fitting + ConRadius(ND_FiSiphon);
            Z_FiSiphonCoupling
        ], L_FiSiphonPipe1b, [0; 0]*deg, ND_FiSiphon, PS_Default)
    otherwise
        PipeF([
            Fi_origin[0] - S_Fitting - ConRadius(ND_FiSiphon);
            Fi_origin[1] + L_Fi - L_FiManFerncoCoupling/2;
            Z_FiSiphonCoupling
        ], L_FiSiphonPipe1b, [90; 0]*deg, ND_FiSiphon, PS_Default)
SubtractFiSiphonOrificesCaps := SubtractF(["FiSiphonFitting"], "DeleteMe")
FiSiphonManOrificeScript := stack(FiSiphonOrifices, GroupDelete, SubtractFiSiphonOrificesPipe, FiSiphonOrifices, GroupDelete, SubtractFiSiphonOrificesCaps, FiSiphonOrificeFrz, FiSiphonPipeSelect, FiSiphonPipe1a, FiSiphonPipe1b, FiSiphonPipeFrz)
# Siphon Air Realese Plumbing
# The air release valve needs to be brought up to the plant walkway!
FiSiphonAirReleaseReducer0_Origin := FiSiphonTee2_Origin + {
    [ShortTeeLength(ND_FiSiphon); 0 m; TeeLength(ND_FiSiphon)/2] if EN_DoubleTrain == 0
    [0 m; ShortTeeLength(ND_FiSiphon); TeeLength(ND_FiSiphon)/2] otherwise
}
L_FiSiphonAirReleaseReducer0 := SocketDepth(ND_FiSiphon)
L_FiSiphonAirReleaseShortPipe := L_FiSiphonAirReleaseReducer0 + SocketDepth(ND_FiAirReleaseMid)
FiSiphonAirReleaseShortPipe_Origin := FiSiphonAirReleaseReducer0_Origin
FiSiphonAirReleaseElbow1_Origin := FiSiphonAirReleaseReducer0_Origin + {
    if EN_DoubleTrain == 0
        [
            -ElbowRadius(ND_FiAirReleaseMid);
            0 m;
            L_FiSiphonAirReleaseReducer0 + ElbowRadius(ND_FiAirReleaseMid) + SocketDepth(ND_FiAirReleaseMid)
        ]
    otherwise
        [
            0 m;
            -ElbowRadius(ND_FiAirReleaseMid);
            L_FiSiphonAirReleaseReducer0 + ElbowRadius(ND_FiAirReleaseMid) + SocketDepth(ND_FiAirReleaseMid)
        ]
}
FiSiphonAirReleaseHorizPipe_Origin := FiSiphonAirReleaseElbow1_Origin
FiSiphonAirReleaseElbow2_Origin :=
    if EN_DoubleTrain == 0
        [
            Fi_origin[0] + T_FiWall + ConRadius(ND_FiAirReleaseMid);
            FiSiphonAirReleaseElbow1_Origin[1];
            FiSiphonAirReleaseElbow1_Origin[2] + ElbowRadius(ND_FiAirReleaseMid)
        ]
    otherwise
        [
            FiSiphonAirReleaseElbow1_Origin[0];
            Fi_origin[1] + T_FiWall + ConRadius(ND_FiAirReleaseMid);
            FiSiphonAirReleaseElbow1_Origin[2] + ElbowRadius(ND_FiAirReleaseMid)
        ]
L_FiSiphonAirReleaseHorizPipe := FiSiphonAirReleaseElbow1_Origin[0] - FiSiphonAirReleaseElbow2_Origin[0] - ElbowRadius(ND_FiAirReleaseMid)
FiSiphonAirReleaseVertPipe_Origin := FiSiphonAirReleaseElbow2_Origin
FiSiphonAirReleaseReducer1_Origin := [FiSiphonAirReleaseElbow2_Origin[0]; FiSiphonAirReleaseElbow2_Origin[1]; Z_Walkway]
L_FiSiphonAirReleaseVertPipe := FiSiphonAirReleaseReducer1_Origin[2] - FiSiphonAirReleaseElbow2_Origin[2] + SocketDepth(ND_FiSiphonAirValve)
# Make the first reducer:
FiSiphonReducerCyl1 := CylinderF(FiSiphonAirReleaseReducer0_Origin, outerradius(ND_FiSiphon), SocketDepth(ND_FiSiphon), [0; 90]*deg)
FiSiphonReducerCyl3 := CylinderF(FiSiphonAirReleaseReducer1_Origin, InnerRadiusFlex(ND_FiSiphonAirValve), SocketDepth(ND_FiAirReleaseMid), [0; 90]*deg)
FiReducerLayerNot1 := layer_new("FiRedNot1", purple)
FiSiphonReducerCyl2 := CylinderF(FiSiphonAirReleaseReducer0_Origin, outerradius(ND_FiAirReleaseMid), SocketDepth(ND_FiSiphon), [0; 90]*deg)
FiReducerLayerNot2 := layer_new("FiRedNot2", purple)
FiSiphonReducerCyl4 := CylinderF(FiSiphonAirReleaseReducer1_Origin, outerradius(ND_FiSiphonAirValve), SocketDepth(ND_FiAirReleaseMid), [0; 90]*deg)
FiSiphonReducerSubtract := SubtractF(["FiSiphonFitting"], "DeleteMe")
FiReducerNotFrz1 := FreezeLayer("FiRedNot1")
FiReducerNotFrz2 := FreezeLayer("FiRedNot2")
FiSiphonAirValveReducers := stack(FiSiphonFittingSelect, FiSiphonReducerCyl1, FiSiphonReducerCyl3, FiSiphonFittingFrz, FiReducerLayerNot1, FiSiphonReducerCyl2, GroupDelete, FiSiphonReducerSubtract, FiReducerNotFrz1, FiReducerLayerNot2, FiSiphonReducerCyl4, GroupDelete, FiSiphonReducerSubtract, FiReducerNotFrz2)
DrawFiSiphonAirReleaseElbow1 :=
    ElbowF(FiSiphonAirReleaseElbow1_Origin, [-90; 0; -90]*deg, ND_FiAirReleaseMid, PS_Default) if EN_DoubleTrain == 0
    ElbowF(FiSiphonAirReleaseElbow1_Origin, [0; -90; -90]*deg, ND_FiAirReleaseMid, PS_Default) otherwise
DrawFiSiphonAirReleaseElbow2 :=
    ElbowF(FiSiphonAirReleaseElbow2_Origin, [180; 0; 90]*deg, ND_FiAirReleaseMid, PS_Default) if EN_DoubleTrain == 0
    ElbowF(FiSiphonAirReleaseElbow2_Origin, [0; 180; 90]*deg, ND_FiAirReleaseMid, PS_Default) otherwise
FiSiphonAirReleaseFittingsScript := stack(FiSiphonAirValveReducers, FiSiphonFittingSelect, DrawFiSiphonAirReleaseElbow1, DrawFiSiphonAirReleaseElbow2, FiSiphonFittingFrz)
DrawFiSiphonAirReleaseShortPipe := PipeF(FiSiphonAirReleaseShortPipe_Origin, L_FiSiphonAirReleaseShortPipe, [0; 90; 0]*deg, ND_FiAirReleaseMid, PS_Default)
DrawFiSiphonAirReleaseHorizPipe := PipeF(FiSiphonAirReleaseHorizPipe_Origin, L_FiSiphonAirReleaseHorizPipe, [0; 0; 0]*deg, ND_FiAirReleaseMid, PS_Default)
DrawFiSiphonAirReleaseVertPipe := PipeF(FiSiphonAirReleaseVertPipe_Origin, L_FiSiphonAirReleaseVertPipe, [0; 90; 0]*deg, ND_FiAirReleaseMid, PS_Default)
FiSiphonAirReleasePlumbingScript := stack(FiSiphonPipeSelect, DrawFiSiphonAirReleaseShortPipe, DrawFiSiphonAirReleaseHorizPipe, DrawFiSiphonAirReleaseVertPipe, FiSiphonPipeFrz)
FiSiphonValveLayer := layer_new("FiSiphonAirValve", black)
BlockHelp3 := BoxF(FiSiphonAirReleaseReducer1_Origin, FiSiphonAirReleaseReducer1_Origin + [-tiny; -tiny; tiny], [0; 0; 0]*deg)
FiSiphonAirValve := insertdwg("https://confluence.cornell.edu/download/attachments/173604905/FiMetalBallValve.dwg", FiSiphonAirReleaseReducer1_Origin, 2*outerradius(ND_FiSiphonAirValve)*1/(125 in), 2*outerradius(ND_FiSiphonAirValve)*1/(125 in), 0 deg)
FiSiphonValveFrz := FreezeLayer("FiSiphonAirValve")
FiSiphonAirValveScript := stack(FiSiphonValveLayer, BlockHelp3, FiSiphonAirValve, FiSiphonValveFrz)
FiSiphonAirReleaseScript := stack(FiSiphonAirValveReducers, FiSiphonAirReleaseFittingsScript, FiSiphonAirReleasePlumbingScript, FiSiphonAirValveScript)
FiSiphonScript := stack(FiSiphonFittingScript, FiSiphonPipeScript, FiSiphonManOrificeScript, FiSiphonAirReleaseScript)
# Array the Filter and Union Concrete
ThawFilter := ThawMultiple(["Fi*"])
FiArray1Frz := ["FiAuxPipePlu"; "FiAuxFittingPlu"; "FiAuxRemovablePlu"; "FiDistPipePlu"; "FiDistFittingPlu"; "FiOverflowDistBoxCon"; "FiInletChannelCon"; "FiInletFittingsPlu"; "FiInletPipePlu"]
FreezeFiPieces := FreezeMultiple(FiArray1Frz)
ArrayFi1 :=
    Array_All(N_Fi, 1, -(W_Fi + T_FiWall)) if EN_DoubleTrain == 0
    Array_All(1, N_Fi, W_Fi + T_FiWall) otherwise
FreezeFi := FreezeMultiple(["Fi*"])
FiArray2Thw := ["FiAuxPipePlu"; "FiAuxFittingPlu"; "FiAuxRemovablePlu"; "FiDistPipePlu"; "FiDistFittingPlu"; "FiOverflowDistBoxCon"]
ThawFiPieces := ThawMultiple(FiArray2Thw)
ArrayFi2 :=
    if N_Fi ≠ 4
        Array_All(N_Fi - (N_Fi > 1), 1, -(W_FiEntrance + 2*T_PlantWall + W_FiOverflow)) if EN_DoubleTrain == 0
        Array_All(1, N_Fi - (N_Fi > 1), W_FiEntrance + 2*T_PlantWall + W_FiOverflow) otherwise
    otherwise
        Array_All(N_Fi - (N_Fi > 1) - 1, 1, -2*(W_FiEntrance + 2*T_PlantWall + W_FiOverflow)) if EN_DoubleTrain == 0
        Array_All(1, N_Fi - (N_Fi > 1) - 1, 2*(W_FiEntrance + 2*T_PlantWall + W_FiOverflow)) otherwise
# Do not array the distribution and overflow box between PAIRS of fiters
# mrf222
ThawFilterConcrete := ThawMultiple(["Fi*Con"])
RenameFilterConcrete :=
    RenameLayer("FiEntExitBoxCon", "FiCon") if N_Fi == 2
    RenameLayer("FiOverflowDistBoxCon", "FiCon") otherwise
GroupFilterConcrete := GroupAll("FiCon")
FiArrayScript :=
    stack(ThawFilterConcrete, Union_All, RenameFilterConcrete, GroupFilterConcrete, FreezeFi) if N_Fi == 1
    stack(ThawFilter, FreezeFiPieces, ArrayFi1, FreezeFi, ThawFiPieces, ArrayFi2, FreezeFi, ThawFilterConcrete, Union_All, RenameFilterConcrete, GroupFilterConcrete, FreezeFi) otherwise
# Overflow, Inlet and Distribution Weirs, and Adjust Wall Thickness
FiAuxCutoutLayer := layer_new("FiAuxCutout", grey)
FiEntranceCutout := BoxF(FiEntranceBox_origin, FiEntranceBox_origin + {
    [-L_FiEntrance; W_FiEntrance; H_FiEntrance] if EN_DoubleTrain == 0
    [-W_FiEntrance; L_FiEntrance; H_FiEntrance] otherwise
}, [0; 0; 0]*deg)
ArrayFiEntranceCutout := ArrayLast(1, N_Fi, W_FiEntrance + 2*T_FiWall + W_FiOverflow)
FiExitCutout := BoxF(FiExitBox_origin, FiExitBox_origin + {
    [-L_FiExit; W_FiEntrance; H_FiEntrance] if EN_DoubleTrain == 0
    [-W_FiEntrance; L_FiExit; H_FiEntrance] otherwise
}, [0; 0; 0]*deg)
ArrayFiExitCutout := ArrayLast(1, N_Fi, W_FiEntrance + 2*T_FiWall + W_FiOverflow)
FiOverflowCutout := BoxF(FiOverflowBox_Origin, FiOverflowBox_Origin + {
    [-L_FiEntrance; W_FiOverflow; H_FiEntrance] if EN_DoubleTrain == 0
    [-W_FiOverflow; L_FiEntrance; H_FiEntrance] otherwise
}, [0; 0; 0]*deg)
ArrayFiOverflowCutout :=
    ArrayLast(1, N_Fi - 1, W_FiEntrance + 2*T_FiWall + W_FiOverflow) if N_Fi ≠ 4
    ArrayLast(1, N_Fi - 2, 2*(W_FiEntrance + 2*T_FiWall + W_FiOverflow)) otherwise
FiDistCutout := BoxF(FiDistBox_Origin, FiDistBox_Origin + {
    [-L_FiExit; W_FiOverflow; H_FiEntrance] if EN_DoubleTrain == 0
    [-W_FiOverflow; L_FiExit; H_FiEntrance] otherwise
}, [0; 0; 0]*deg)
ArrayFiDistCutout :=
    ArrayLast(1, N_Fi - 1, W_FiEntrance + 2*T_FiWall + W_FiOverflow) if N_Fi ≠ 4
    ArrayLast(1, N_Fi - 2, 2*(W_FiEntrance + 2*T_FiWall + W_FiOverflow)) otherwise
FiIChannelCutout := BoxF(FiInletChannel_Origin, FiInletChannel_Origin + {
    [-L_FiInletChannel; T_PlantWall; H_FiInletChannel] if EN_DoubleTrain == 0
    [-T_PlantWall; L_FiInletChannel; H_FiInletChannel] otherwise
}, [0; 0; 0]*deg)
FiArrayWallAdjust :=
    if EN_DoubleTrain == 0
        BoxF(FiOverflowBox_Origin + [T_PlantWall + L_FiOverflow; T_ChannelWall; -T_PlantWall], FiOverflowBox_Origin + [
            -W_FiEntrance - T_ChannelWall - W_FiEntrance - T_PlantWall + L_FiOverflow;
            T_PlantWall;
            H_FiEntrance
        ], [0; 0; 0]*deg)
    otherwise
        BoxF(FiOverflowBox_Origin + [T_ChannelWall; T_PlantWall + L_FiOverflow; -T_PlantWall], FiOverflowBox_Origin + [
            T_PlantWall;
            -W_FiEntrance - T_ChannelWall - W_FiEntrance - T_PlantWall + L_FiOverflow;
            H_FiEntrance
        ], [0; 0; 0]*deg)
FiAuxCutoutFrz := FreezeLayer("FiAuxCutout")
# The wall thickness cutouts are only needed if for some reason the plant wall thickness has to be adjusted! NOT currently used or needed!
FiWallThicknessCutouts == {
    stack(FiAuxCutoutLayer, FiEntranceCutout, ArrayFiEntranceCutout, FiExitCutout, ArrayFiExitCutout, FiOverflowCutout, ArrayFiOverflowCutout, FiDistCutout, ArrayFiDistCutout, FiIChannelCutout, FiAuxCutoutFrz) if N_Fi < 2
    stack(FiAuxCutoutLayer, FiEntranceCutout, ArrayFiEntranceCutout, FiExitCutout, ArrayFiExitCutout, FiOverflowCutout, ArrayFiOverflowCutout, FiDistCutout, ArrayFiDistCutout, FiIChannelCutout, FiArrayWallAdjust, ArrayFiDistCutout, FiAuxCutoutFrz) otherwise
}
Z_FiOverflowWeir = 1.5141 m
# Distribution Barrier:
FiDistBarrierLayer := layer_new("FiDistBarrier", grey)
# Dimensions of the Distrubution Barrier:
SD_OutPipe3 := SocketDepth(ND_FiBwTrunk) = 0.1016 m
HDif_OutPipeTopDB := L_FiOut3PipeZ - SD_OutPipe3 - H_FiDistBarrier = 2.7851 m
SF_FiOutletWeir := 1.001
OutPipeFountain := S_PipeStubWeir(Q_Plant/(3*N_Fi), ND_FiTrunk, SD_OutPipe3, SF_FiOutletWeir, PS_Default) = 0.15036 m
W_Weir := (FiExitCoupling2_origin[1] - OutPipeFountain - S_Fitting) - (FiEntranceBox_origin[1] - T_ChannelWall - W_FiOverflow/2) - outerradius(ND_DistPipe) = 0.149652 m
WeirWidth(W_Weir) :=
    W_Barrier ← 0.15 m if W_Weir ≥ 0.15 m
    W_Barrier ← 0.05 m if W_Weir ≤ 0.05 m
    W_Barrier ← W_Weir otherwise
    return W_Barrier  # function used to calculate the weir width
W_FiDistBarrier := WeirWidth(W_Weir) = 0.149652 m
dx_FiExitPipe := FiExitBox_origin[0] - T_ConcreteMin - ConRadius(ND_FiTrunk) - (Plant_Origin[0] - W_FiInletChannel - 2*T_PlantWall - L_Sed - W_PlantDC - T_ChannelWall + (-L_FiEntrance - T_ChannelWall)) = -0.142075 m
PipeDepth := Z_FiEntranceBottom - (FiExitBox_origin[2] - CouplingLength(ND_FiExitWaste) + SocketDepth(ND_FiExitWaste)) = 0.0700786 m
FiDistBarrier_Origin := FiExitCoupling3_origin - [dx_FiExitPipe; OutPipeFountain; -PipeDepth] = [-8.62772; 2.61426; 0.614096] m
FiDistBarrier_FarCorner := FiExitCoupling3_origin - [dx_FiExitPipe; OutPipeFountain; -PipeDepth] + [-L_FiExit; -W_FiDistBarrier; H_FiDistBarrier]
FiDistBarrier := BoxF(FiDistBarrier_Origin, FiDistBarrier_FarCorner, [0; 0; 0]*deg)
MirrorBarrier := Mirror3dAll("zx", [
    FiExitBox_origin[0] - L_FiExit/2;
    FiEntranceBox_origin[1] - T_ChannelWall - W_FiOverflow/2;
    Z_FiExitBottom - SocketDepth(ND_DistPipe)
], "N")
ArrayFiDistBarrier :=
    if N_Fi ≠ 4
        Array_All(N_Fi - 1, 1, -(W_Fi + T_FiWall)) if EN_DoubleTrain == 0
        Array_All(1, N_Fi - 1, W_Fi + T_FiWall) otherwise
    otherwise
        Array_All(N_Fi - 2, 1, -2*(W_Fi + T_FiWall)) if EN_DoubleTrain == 0
        Array_All(1, N_Fi - 2, 2*(W_Fi + T_FiWall)) otherwise
MirrorArrayDistBarrier :=
    MirrorBarrier if N_Fi < 3
    stack(MirrorBarrier, ArrayFiDistBarrier) otherwise
FreezeFiDistBarrier := FreezeLayer("FiDistBarrier")
FiBarrier :=
    stack(FiDistBarrierLayer, FiDistBarrier, MirrorArrayDistBarrier, FreezeFiDistBarrier) if N_Fi ≥ 2
    stack(FiDistBarrierLayer, FiDistBarrier, FreezeFiDistBarrier) otherwise
FiOverflowWeirs :=
    if EN_DoubleTrain == 0
        BoxF([FiEntranceBox_origin[0] - L_FiEntrance; FiEntranceBox_origin[1]; Z_FiOverflowWeir], [
            FiEntranceBox_origin[0] - L_FiEntrance + L_FiOverflowWeir;
            FiEntranceBox_origin[1] - T_ChannelWall - (N_Fi > 1)*(N_Fi - 1)*(W_FiOverflow + T_PlantWall) - (N_Fi > 2)*(N_Fi - 1)*(W_FiEntrance + T_PlantWall);
            Z_FiTop
        ], [0; 0; 0]*deg)
    otherwise
        BoxF([FiEntranceBox_origin[0]; FiEntranceBox_origin[1]; Z_FiOverflowWeir], [
            FiEntranceBox_origin[0] + T_ChannelWall + (N_Fi > 1)*(N_Fi - 1)*(W_FiOverflow + T_ChannelWall) + (N_Fi > 2)*(N_Fi - 1)*(W_FiEntrance + T_ChannelWall);
            FiEntranceBox_origin[1] + L_FiOverflowWeir;
            Z_FiTop
        ], [0; 0; 0]*deg)
FiDistBarrierCut :=
    if EN_DoubleTrain == 0
        BoxF(FiExitBox_origin, FiExitBox_origin + [
            -L_FiExit;
            -T_PlantWall - (N_Fi > 1)*(N_Fi - 1)*(W_FiOverflow + T_PlantWall) - (N_Fi > 2)*(N_Fi - 1)*(W_FiEntrance + T_PlantWall);
            H_FiEntrance
        ], [0; 0; 0]*deg)
    otherwise
        BoxF(FiExitBox_origin + [0 m; L_FiExit; H_FiExit], FiExitBox_origin + [
            T_ChannelWall + (N_Fi > 1)*(N_Fi - 1)*(W_FiOverflow + T_FiWall) + (N_Fi > 2)*(N_Fi - 1)*(W_FiEntrance + T_FiWall);
            0 m;
            H_FiEntrance
        ], [0; 0; 0]*deg)
FiSubtractWeirs := SubtractF(["Fi*Con"], "DeleteMe")
# Removing a wedge from the Distribution Barrier:
WedgeLayer := layer_new("FiWedgeLayer", purple)
Wedge_Origin := FiDistBarrier_Origin + [0 m; 0 m; H_FiDistBarrier]
Wedge_FarCorner := Wedge_Origin + [W_FiDistBarrier; -L_FiExit; -H_FiDistBarrier + 0.03 m]
BuildWedge := WedgeF(Wedge_Origin, Wedge_FarCorner, [-90; 0; 0]*deg)
# Added arrays for the barrier and wedge
MirrorWedge := Mirror3dAll("zx", [
    FiExitBox_origin[0] - L_FiExit/2;
    FiEntranceBox_origin[1] - T_ChannelWall - W_FiOverflow/2;
    Z_FiExitBottom - SocketDepth(ND_DistPipe)
], "N")
ArrayFiWedge :=
    if N_Fi ≠ 4
        Array_All(N_Fi - 1, 1, -(W_Fi + T_FiWall)) if EN_DoubleTrain == 0
        Array_All(1, N_Fi - 1, W_Fi + T_FiWall) otherwise
    otherwise
        Array_All(N_Fi - 2, 1, -2*(W_Fi + T_FiWall)) if EN_DoubleTrain == 0
        Array_All(1, N_Fi - 2, 2*(W_Fi + T_FiWall)) otherwise
MirrorArrayWedge :=
    MirrorWedge if N_Fi < 3
    stack(MirrorWedge, ArrayFiWedge) otherwise
FiSubtractWedge := SubtractF(["FiDistBarrier"], "DeleteMe")
FreezeWedge := FreezeLayer("FiWedgeLayer")
FiWedge :=
    stack(WedgeLayer, BuildWedge, MirrorArrayWedge, GroupDelete, FiSubtractWedge, FreezeWedge) if N_Fi ≥ 2
    stack(WedgeLayer, BuildWedge, GroupDelete, FiSubtractWedge, FreezeWedge) otherwise
FiWeirScript := stack(FiAuxCutoutLayer, FiOverflowWeirs, FiDistBarrierCut, GroupDelete, FiSubtractWeirs, FiAuxCutoutFrz, FiBarrier, FiWedge)
# Finish Distribution Plumbing
SelectDistFittingLayer := SelectLayer("FiDistFittingPlu")
FiDistElbow2 :=
    if EN_DoubleTrain == 0
        ElbowF([
            min(FiExitBox_origin[0] - L_FiExit/2 - ElbowRadius(ND_DistPipe) - 2*SocketDepth(ND_DistPipe), FiExitBox_origin[0] - L_FiExit - T_PlantWall);
            FiEntranceBox_origin[1] - T_ChannelWall - W_FiOverflow/2;
            Z_FiDistPipe
        ], [90; 0; 0]*deg, ND_DistPipe, PS_Default)
    otherwise
        ElbowF([
            FiEntranceBox_origin[0] + T_ChannelWall + W_FiOverflow/2;
            FiExitBox_origin[1] + L_FiExit/2 - ElbowRadius(ND_DistPipe) - 2*SocketDepth(ND_DistPipe);
            Z_FiDistPipe + ElbowRadius(ND_DistPipe)
        ], [180; 0; 0]*deg, ND_DistPipe, PS_Default)
SlideDownPeninsula :=
    W_FiEntrance + W_FiOverflow + 2*T_PlantWall if N_Fi ≥ 4
    0 otherwise
FiDistTee :=
    if EN_DoubleTrain == 0
        TeeF([
            min(FiExitBox_origin[0] - L_FiExit/2 - ElbowRadius(ND_DistPipe) - 2*SocketDepth(ND_DistPipe), FiExitBox_origin[0] - L_FiExit - T_PlantWall) - ElbowRadius(ND_DistPipe) + ShortTeeLength(ND_DistPipe);
            FiEntranceBox_origin[1] - W_FiEntrance - 2*T_PlantWall - 3/2*W_FiOverflow - T_ChannelWall - SlideDownPeninsula;
            Z_FiDistPipe
        ], [270; 0; 0]*deg, ND_DistPipe, PS_Default)
    otherwise
        TeeF([
            FiEntranceBox_origin[0] + 3*T_ChannelWall + 3*W_FiOverflow/2 + W_FiEntrance + SlideDownPeninsula;
            min(FiExitBox_origin[1] + L_FiExit/2 - ElbowRadius(ND_DistPipe) - 2*SocketDepth(ND_DistPipe), FiExitBox_origin[1] - T_PlantWall) - ElbowRadius(ND_DistPipe) + ShortTeeLength(ND_DistPipe);
            Z_FiDistPipe
        ], [0; 0; 0]*deg, ND_DistPipe, PS_Default)
ArrayFiDist :=
    if N_Fi < 4
        ArrayLast(N_Fi - 2, 1, -(W_FiEntrance + W_FiOverflow + 2*T_PlantWall)) if EN_DoubleTrain == 0
        ArrayLast(1, N_Fi - 2, W_FiEntrance + W_FiOverflow + 2*T_PlantWall) otherwise
    otherwise
        ArrayLast(N_Fi - 3, 1, -(W_FiEntrance + W_FiOverflow + 2*T_PlantWall)) if EN_DoubleTrain == 0
        ArrayLast(1, N_Fi - 3, W_FiEntrance + W_FiOverflow + 2*T_PlantWall) otherwise
# Here the dist tee and pipe is arrayed some number of times...
# The length of the pipe still must be adjusted
ArrayFiDist == {
    ArrayLast(N_Fi - 2, 1, -(W_FiEntrance + W_FiOverflow + 2*T_PlantWall)) if EN_DoubleTrain == 0
    ArrayLast(1, N_Fi - 2, W_FiEntrance + W_FiOverflow + 2*T_PlantWall) otherwise
}
FiDistFinishFittingScript :=
    stack(SelectDistFittingLayer, FiDistElbow2, FiDistFittingFrz) if N_Fi ≤ 2
    stack(SelectDistFittingLayer, FiDistElbow2, FiDistTee, ArrayFiDist, FiDistFittingFrz) otherwise
SelectDistPipeLayer := SelectLayer("FiDistPipePlu")
L_FiDistPipe2 := max(L_FiExit/2 - ElbowRadius(ND_DistPipe) + T_PlantWall, 2*SocketDepth(ND_DistPipe))
L_FiDistPipe3 := W_FiOverflow + W_FiEntrance + 2*T_PlantWall - ElbowRadius(ND_DistPipe) - TeeLength(ND_DistPipe)/2
L_FiDistPipe4 := max(L_FiExit/2 - ElbowRadius(ND_DistPipe) + T_PlantWall, 2*SocketDepth(ND_DistPipe)) + ElbowRadius(ND_DistPipe) - ShortTeeLength(ND_DistPipe)
L_FiDistPipe5 := W_FiOverflow + W_FiEntrance + 2*T_PlantWall - TeeLength(ND_DistPipe)
FiDistPipe2 :=
    if EN_DoubleTrain == 0
        PipeF([
            FiExitBox_origin[0] - L_FiExit/2 - ElbowRadius(ND_DistPipe);
            FiEntranceBox_origin[1] - T_ChannelWall - W_FiOverflow/2;
            Z_FiDistPipe
        ], L_FiDistPipe2, [0; 0; 0]*deg, ND_DistPipe, PS_Default)
    otherwise
        PipeF([
            FiEntranceBox_origin[0] + T_ChannelWall + W_FiOverflow/2;
            FiExitBox_origin[1] + L_FiExit/2 - ElbowRadius(ND_DistPipe);
            Z_FiDistPipe
        ], L_FiDistPipe2, [90; 0; 0]*deg, ND_DistPipe, PS_Default)
FiDistPipe3 :=
    if EN_DoubleTrain == 0
        PipeF([
            min(FiExitBox_origin[0] - L_FiExit/2 - ElbowRadius(ND_DistPipe) - 2*SocketDepth(ND_DistPipe), FiExitBox_origin[0] - L_FiExit - T_PlantWall) - ElbowRadius(ND_DistPipe);
            FiEntranceBox_origin[1] - T_ChannelWall - W_FiOverflow/2 - ElbowRadius(ND_DistPipe);
            Z_FiDistPipe
        ], L_FiDistPipe3, [90; 0; 0]*deg, ND_DistPipe, PS_Default)
    otherwise
        PipeF([
            FiEntranceBox_origin[0] + T_ChannelWall + W_FiOverflow/2 + ElbowRadius(ND_DistPipe) + L_FiDistPipe3;
            min(FiExitBox_origin[1] + L_FiExit/2 - ElbowRadius(ND_DistPipe) - 2*SocketDepth(ND_DistPipe), FiExitBox_origin[1] - T_PlantWall) - ElbowRadius(ND_DistPipe);
            Z_FiDistPipe
        ], L_FiDistPipe3, [0; 0; 0]*deg, ND_DistPipe, PS_Default)
FiDistPipe4 :=
    if EN_DoubleTrain == 0
        PipeF([
            FiExitBox_origin[0] - L_FiExit/2 - ElbowRadius(ND_DistPipe);
            FiEntranceBox_origin[1] - W_FiEntrance - 2*T_PlantWall - 3/2*W_FiOverflow - T_ChannelWall - SlideDownPeninsula;
            Z_FiDistPipe
        ], L_FiDistPipe4, [0; 0; 0]*deg, ND_DistPipe, PS_Default)
    otherwise
        PipeF([
            FiEntranceBox_origin[0] + W_FiEntrance + 2*T_PlantWall + 3/2*W_FiOverflow + T_ChannelWall + SlideDownPeninsula;
            FiExitBox_origin[1] + L_FiExit/2 - ElbowRadius(ND_DistPipe);
            Z_FiDistPipe
        ], L_FiDistPipe4, [90; 0; 0]*deg, ND_DistPipe, PS_Default)
FiDistPipe5 :=
    if EN_DoubleTrain == 0
        PipeF([
            min(FiExitBox_origin[0] - L_FiExit/2 - ElbowRadius(ND_DistPipe) - 2*SocketDepth(ND_DistPipe), FiExitBox_origin[0] - L_FiExit - T_PlantWall) - ElbowRadius(ND_DistPipe);
            FiEntranceBox_origin[1] - W_FiEntrance - 2*T_PlantWall - 3/2*W_FiOverflow - TeeLength(ND_DistPipe)/2 - T_ChannelWall;
            Z_FiDistPipe
        ], L_FiDistPipe5, [90; 0; 0]*deg, ND_DistPipe, PS_Default)
    otherwise
        PipeF([
            FiEntranceBox_origin[0] + W_FiEntrance + 2*T_PlantWall + 3/2*W_FiOverflow + TeeLength(ND_DistPipe)/2 + T_ChannelWall;
            min(FiExitBox_origin[1] + L_FiExit/2 - ElbowRadius(ND_DistPipe) - 2*SocketDepth(ND_DistPipe), FiExitBox_origin[1] - T_PlantWall) - ElbowRadius(ND_DistPipe);
            Z_FiDistPipe
        ], L_FiDistPipe5, [0; 180; 0]*deg, ND_DistPipe, PS_Default)
FiDistPipePeninsula :=
    if EN_DoubleTrain == 0
        PipeF([
            min(FiExitBox_origin[0] - L_FiExit/2 - ElbowRadius(ND_DistPipe) - 2*SocketDepth(ND_DistPipe), FiExitBox_origin[0] - L_FiExit - T_PlantWall) - ElbowRadius(ND_DistPipe);
            FiEntranceBox_origin[1] - T_ChannelWall - W_FiOverflow/2 - ElbowRadius(ND_DistPipe);
            Z_FiDistPipe
        ], 2*L_FiDistPipe3 + TeeLength(ND_DistPipe), [90; 0; 0]*deg, ND_DistPipe, PS_Default)
    otherwise
        PipeF([
            FiEntranceBox_origin[0] + T_ChannelWall + W_FiOverflow/2 + ElbowRadius(ND_DistPipe) + L_FiDistPipe3;
            min(FiExitBox_origin[1] + L_FiExit/2 - ElbowRadius(ND_DistPipe) - 2*SocketDepth(ND_DistPipe), FiExitBox_origin[1] - T_PlantWall) - ElbowRadius(ND_DistPipe);
            Z_FiDistPipe
        ], 2*L_FiDistPipe3 + TeeLength(ND_DistPipe), [0; 0; 0]*deg, ND_DistPipe, PS_Default)
FiDistFinishPipeScript :=
    stack(SelectDistPipeLayer, FiDistPipe2, FiDistPipe3, FiDistPipeFrz) if N_Fi ≤ 2
    stack(SelectDistPipeLayer, FiDistPipe2, FiDistPipe3, FiDistPipe4, ArrayFiDist, FiDistPipe5, ArrayFiDist, FiDistPipeFrz) if N_Fi == 3
    stack(SelectDistPipeLayer, FiDistPipe2, FiDistPipePeninsula, FiDistPipe4, ArrayFiDist, FiDistPipeFrz) otherwise
FiDistFinishScript := stack(FiDistFinishFittingScript, FiDistFinishPipeScript)
# Finish Siphon Plumbing
# Channel Coupling
FiSiphonChannelCoupling_Origin :=
    if EN_DoubleTrain == 0
        [
            Fi_origin[0] + T_FiWall + SocketDepth(ND_FiSiphon) + ShortTeeLength(ND_FiSiphon) + 2*ElbowRadius(ND_FiSiphon) + L_FiSiphonPipeBottom;
            Fi_origin[1] + S_Fitting + ConRadius(ND_FiSiphon);
            PlantLowerDC_Origin[2] - H_PlantDC - Slope_PlantDC*(L_PlantLowerDC - (T_PlantWall + Fi_origin[1] + S_Fitting + 2*ConRadius(ND_FiSiphon))) - SocketDepth(ND_FiSiphon)
        ]
    otherwise
        [
            Fi_origin[0] - S_Fitting - ConRadius(ND_FiSiphon);
            Fi_origin[1] + L_Fi + T_FiWall + SocketDepth(ND_FiSiphon) + ShortTeeLength(ND_FiSiphon) + 2*ElbowRadius(ND_FiSiphon) + L_FiSiphonPipeBottom;
            PlantSideDC_Origin[2] - H_PlantDC + Slope_PlantDC*((Plant_Origin[0] - L_Sed - T_PlantWall) - (Fi_origin[0] - S_Fitting - ConRadius(ND_FiSiphon))) - CouplingLength(ND_FiSiphon)
        ]
FiSiphonChannelCoupling(N) := CouplingSUBF(FiSiphonChannelCoupling_Origin + {
    ((N - 1)*[0 m; -W_Fi - T_FiWall; -Slope_PlantDC*(W_Fi + T_FiWall)]) if EN_DoubleTrain == 0
    ((N - 1)*[W_Fi + T_FiWall; 0 m; Slope_PlantDC*(W_Fi + T_FiWall)]) otherwise
}, [0; 270]*deg, ND_FiSiphon, PS_Default, ["DrainChannelCon"])
FiSiphonChannelCouplingScript :=
    N ← 1
    Local ← stack(FiSiphonFittingSelect, FiSiphonChannelCoupling(N))
    while N_Fi > N
        N ← N + 1
        Local ← stack(Local, FiSiphonChannelCoupling(N))
    Local ← stack(Local, FiSiphonFittingFrz)
    return Local
# Pipe Beneath Drain Channel
FiSiphonChannelPipe_Origin :=
    if EN_DoubleTrain == 0
        [
            Fi_origin[0] + T_FiWall + SocketDepth(ND_FiSiphon) + ShortTeeLength(ND_FiSiphon) + 2*ElbowRadius(ND_FiSiphon) + L_FiSiphonPipeBottom;
            Fi_origin[1] + S_Fitting + ConRadius(ND_FiSiphon);
            Fi_origin[2] + ElbowRadius(ND_FiSiphon)
        ]
    otherwise
        [
            Fi_origin[0] - S_Fitting - ConRadius(ND_FiSiphon);
            Fi_origin[1] + L_Fi + T_FiWall + SocketDepth(ND_FiSiphon) + ShortTeeLength(ND_FiSiphon) + 2*ElbowRadius(ND_FiSiphon) + L_FiSiphonPipeBottom;
            Fi_origin[2] + ElbowRadius(ND_FiSiphon)
        ]
L_FiSiphonChannelPipe1 := FiSiphonChannelCoupling_Origin[2] - CouplingLength(ND_FiSiphon) + 2*SocketDepth(ND_FiSiphon) - (Z_FiBottom + ElbowRadius(ND_FiSiphon)) = 1.50327 m
FiSiphonChannelPipe(N) := PipeSUBF(FiSiphonChannelPipe_Origin + {
    ((N - 1)*[0 m; -W_Fi - T_FiWall; 0 m]) if EN_DoubleTrain == 0
    ((N - 1)*[W_Fi + T_FiWall; 0 m; 0 m]) otherwise
}, L_FiSiphonChannelPipe1 - (N - 1)*Slope_PlantDC*(W_Fi + T_FiWall), [0; 90]*deg, ND_FiSiphon, PS_Default, ["DrainChannelCon"])
FiSiphonChannelPipeScript :=
    N ← 1
    Local ← stack(FiSiphonPipeSelect, FiSiphonChannelPipe(N))
    while N_Fi > N
        N ← N + 1
        Local ← stack(Local, FiSiphonChannelPipe(N))
    return Local
# Drain Channel Stub
L_FiSiphonChannelStub := Z_FiSiphonOutlet - FiSiphonChannelCoupling_Origin[2] = 0.310059 m
FiSiphonChannelStub(N) := PipeF(FiSiphonChannelCoupling_Origin + {
    ((N - 1)*[0 m; -W_Fi - T_FiWall; -Slope_PlantDC*(W_Fi + T_FiWall)]) if EN_DoubleTrain == 0
    ((N - 1)*[W_Fi + T_FiWall; 0 m; -Slope_PlantDC*(W_Fi + T_FiWall)]) otherwise
}, L_FiSiphonChannelStub + (N - 1)*Slope_PlantDC*(W_Fi + T_FiWall), [0; 90; 0]*deg, ND_FiSiphon, PS_Default)
FiSiphonChannelStubScript :=
    N ← 1
    Local ← FiSiphonChannelStub(N)
    while N_Fi > N
        N ← N + 1
        Local ← stack(Local, FiSiphonChannelStub(N))
    Local ← stack(Local, FiSiphonPipeFrz)
    return Local
FiSiphonFinishScript := stack(FiSiphonChannelCouplingScript, FiSiphonChannelPipeScript, FiSiphonChannelStubScript)
# Finish Box Drain Plumbing
# These aren't arrayed, but looped instead!
# Overflow Box Drain Couplings and Elbow
FiOverflowDrainElbow(N) :=
    if EN_DoubleTrain == 0
        ElbowSUBF([
            X_FiOverflowHorizDrainPipeEnd - ElbowRadius(ND_FiEntOverflow);
            FiEntranceBox_origin[1] - T_ChannelWall - W_FiOverflow/2 - (N - 1)*(W_Fi + T_FiWall);
            Z_FiOverflowVertDrainPipeEnd
        ], [180; 0; 90]*deg, ND_FiEntOverflow, PS_Default, ["FiCon"])
    otherwise
        ElbowSUBF([
            FiEntranceBox_origin[0] + T_ChannelWall + W_FiOverflow/2 + (N - 1)*(W_Fi + T_FiWall);
            Y_FiOverflowHorizDrainPipeEnd - ElbowRadius(ND_FiEntOverflow);
            Z_FiOverflowVertDrainPipeEnd
        ], [0; 90; -90]*deg, ND_FiEntOverflow, PS_Default, ["FiCon"])
FiDrainFittingLayer := layer_new("FiDrainFitting", green)
FiDrainFittingFrz := FreezeLayer("FiDrainFitting")
FiOverflowDrainElbowScript :=
    N ← 1
    space ←
        1 if N_Fi ≠ 4
        2 otherwise
    Local ← stack(FiDrainFittingLayer, FiOverflowDrainElbow(N))
    while N_Fi - space > N
        N ← N + space
        Local ← stack(Local, FiOverflowDrainElbow(N))
    return Local
# the elbow is stacked within the coupling!!!
FiOverflowDrainCouplingHoriz(N) :=
    if EN_DoubleTrain == 0
        CouplingSUBF([
            FiInletChannel_Origin[0] + T_PlantWall - SocketDepth(ND_FiEntOverflow);
            FiEntranceBox_origin[1] - T_ChannelWall - W_FiOverflow/2 - (N - 1)*(W_Fi + T_FiWall);
            Z_FiOverflowVertDrainPipeEnd - ElbowRadius(ND_FiEntOverflow)
        ], [0; 0], ND_FiEntOverflow, PS_Default, ["DrainChannelCon"])
    otherwise
        CouplingSUBF([
            FiEntranceBox_origin[0] + T_ChannelWall + W_FiOverflow/2 + (N - 1)*(W_Fi + T_FiWall);
            FiInletChannel_Origin[1] + W_FiInletChannel + T_PlantWall - SocketDepth(ND_FiEntOverflow);
            Z_FiOverflowVertDrainPipeEnd - ElbowRadius(ND_FiEntOverflow)
        ], [90; 0]*deg, ND_FiEntOverflow, PS_Default, ["DrainChannelCon"])
FiOverflowCouplingFinishScript :=
    N ← 1
    space ←
        1 if N_Fi ≠ 4
        2 otherwise
    Local ← stack(FiOverflowDrainElbowScript, FiOverflowDrainCouplingHoriz(N))
    while N_Fi - space > N
        N ← N + space
        Local ← stack(Local, FiOverflowDrainCouplingHoriz(N))
    Local ← stack(Local, FiDrainFittingFrz)
    return Local
# Overflow Box Drain Horizontal Pipes
FiOverflowDrainPipeHoriz(N) :=
    if EN_DoubleTrain == 0
        PipeSUBF([
            X_FiOverflowHorizDrainPipeStart;
            FiEntranceBox_origin[1] - T_ChannelWall - W_FiOverflow/2 - (N - 1)*(W_Fi + T_FiWall);
            Z_FiOverflowVertDrainPipeEnd - ElbowRadius(ND_FiEntOverflow)
        ], X_FiOverflowHorizDrainPipeStart - X_FiOverflowHorizDrainPipeEnd, [0; 0], ND_FiEntOverflow, PS_Default, ["DrainChannelCon"])
    otherwise
        PipeSUBF([
            FiEntranceBox_origin[0] + T_ChannelWall + W_FiOverflow/2 + (N - 1)*(W_Fi + T_FiWall);
            Y_FiOverflowHorizDrainPipeStart;
            Z_FiOverflowVertDrainPipeEnd - ElbowRadius(ND_FiEntOverflow)
        ], Y_FiOverflowHorizDrainPipeStart - Y_FiOverflowHorizDrainPipeEnd, [90; 0]*deg, ND_FiEntOverflow, PS_Default, ["DrainChannelCon"])
FiDrainPipeLayer := layer_new("FiDrainPipe", blue)
FiDrainPipeFrz := FreezeLayer("FiDrainPipe")
FiOverflowPipeFinishScript :=
    N ← 1
    space ←
        1 if N_Fi ≠ 4
        2 otherwise
    Local ← stack(FiDrainPipeLayer, FiOverflowDrainPipeHoriz(N))
    while N_Fi - space > N
        N ← N + space
        Local ← stack(Local, FiOverflowDrainPipeHoriz(N))
    Local ← stack(Local, FiDrainPipeFrz)
    return Local
# Exit Box Drain Couplings
FiExitDrainChanCoupling(N) :=
    if EN_DoubleTrain == 0
        CouplingSUBF([
            FiInletChannel_Origin[0] + T_PlantWall - SocketDepth(ND_FiExitWaste);
            FiExitCoupling3_origin[1] - (N - 1)*(W_Fi + T_FiWall);
            Z_FiExitDrainOutlet
        ], [0; 0], ND_FiExitWaste, PS_Default, ["DrainChannelCon"])
    otherwise
        CouplingSUBF([
            FiExitCoupling3_origin[0] + (N - 1)*(W_Fi + T_FiWall);
            FiInletChannel_Origin[1] + W_FiInletChannel + T_PlantWall - SocketDepth(ND_FiExitWaste);
            Z_FiExitDrainOutlet
        ], [90; 0]*deg, ND_FiExitWaste, PS_Default, ["DrainChannelCon"])
FiDrainFittingSelect := SelectLayer("FiDrainFitting")
# check for layer name
FiExitHorizDrainCouplingScript :=
    N ← 1
    space ←
        1 if N_Fi ≠ 4
        2 otherwise
    Local ← stack(FiDrainFittingSelect, FiExitDrainChanCoupling(N))
    while N_Fi - space > N
        N ← N + space
        Local ← stack(Local, FiExitDrainChanCoupling(N))
    Local ← stack(Local, FiDrainFittingFrz)
    return Local
# Exit Box Drain Horizontal Pipes
L_FiExitDrainPipeHoriz :=
    (X_FiExitHorizDrainPipeStart - X_FiExitHorizDrainPipeEnd) if EN_DoubleTrain == 0
    (Y_FiExitHorizDrainPipeStart - Y_FiExitHorizDrainPipeEnd) otherwise
FiExitDrainPipeHoriz(N) :=
    if EN_DoubleTrain == 0
        PipeSUBF([
            X_FiExitHorizDrainPipeStart;
            FiExitCoupling3_origin[1] - (N - 1)*(W_Fi + T_FiWall);
            Z_FiExitDrainOutlet
        ], L_FiExitDrainPipeHoriz, [0; 0], ND_FiExitWaste, PS_Default, ["DrainChannelCon"])
    otherwise
        PipeSUBF([
            FiExitCoupling3_origin[0] + (N - 1)*(W_Fi + T_FiWall);
            Y_FiExitHorizDrainPipeStart;
            Z_FiExitDrainOutlet
        ], L_FiExitDrainPipeHoriz, [90; 0]*deg, ND_FiExitWaste, PS_Default, ["DrainChannelCon"])
FiDrainPipeSelect := SelectLayer("FiDrainPipe")
FiExitHorizDrainPipeScript :=
    N ← 1
    space ←
        1 if N_Fi ≠ 4
        2 otherwise
    Local ← stack(FiDrainPipeSelect, FiExitDrainPipeHoriz(N))
    while N_Fi - space > N
        N ← N + space
        Local ← stack(Local, FiExitDrainPipeHoriz(N))
    Local ← stack(Local, FiDrainPipeFrz)
    return Local
FiBoxDrainFinishScript := stack(FiOverflowCouplingFinishScript, FiOverflowPipeFinishScript, FiExitHorizDrainCouplingScript, FiExitHorizDrainPipeScript)
# Finish Entrance and Exit Valves, add removable stop gate and walkway peninsula
ThawAirReleasePieces := SelectLayer("FiEntExitValve")
ArrayFiEntExitValves :=
    Array_All(N_Fi, 1, -(W_Fi + T_FiWall)) if EN_DoubleTrain == 0
    Array_All(1, N_Fi, W_Fi + T_FiWall) otherwise
FreezeEntExitValves := FreezeLayer("FiEntExitValve")
FiEntExitValves := stack(FiValveScript, ThawAirReleasePieces, ArrayFiEntExitValves, FreezeEntExitValves)
FiStopGateLayer := layer_new("FiRemovableStopGate", yellow)
RemovableStopGate := BoxF([
    FiEntranceBox_origin[0] + T_PlantWall - T_ConcreteMin - T_RemovableWeir;
    FiEntranceBox_origin[1] + FiEntranceBox_dim[1]/2 - L_FiEntranceWeir/2 - T_ConcreteMin;
    Z_FiBwFlowControlWide
], [
    FiEntranceBox_origin[0] + T_PlantWall - T_ConcreteMin;
    FiEntranceBox_origin[1] + FiEntranceBox_dim[1]/2 + L_FiEntranceWeir/2 + T_ConcreteMin;
    Z_FiEntranceWeir
], [0; 0; 0]*deg)
ArrayStopGate :=
    Array_All(N_Fi, 1, -(W_Fi + T_FiWall)) if EN_DoubleTrain == 0
    Array_All(1, N_Fi, W_Fi + T_FiWall) otherwise
FiStopGateFrz := FreezeLayer("FiRemovableStopGate")
FistopGateScript := stack(FiStopGateLayer, RemovableStopGate, ArrayStopGate, FiStopGateFrz)
FiWalkway_Dim := [-FiOverflowBox_Dim[0]; FiOverflowBox_Dim[1]; 0] + {
    [-FiDistBox_Dim[0] - 2*T_PlantWall; 0; -T_PlantWall] if EN_DoubleTrain == 0
    [0; FiDistBox_Dim[1] - 2*T_PlantWall; -T_PlantWall] otherwise
}
FiWalkway_Origin := [FiOverflowBox_Origin[0]; FiOverflowBox_Origin[1]; Z_Walkway] + {
    [0; -(W_FiEntrance + 2*T_PlantWall + W_FiOverflow); 0] if EN_DoubleTrain == 0
    [W_FiEntrance + 2*T_PlantWall + W_FiOverflow; 0; 0] otherwise
}
FiPeninsulaWalls_Origin := FiExitBox_origin - {
    [L_FiExit; W_Fi + T_PlantWall + T_FiWall; 0] if EN_DoubleTrain == 0
    [W_Fi + T_PlantWall + T_FiWall; L_FiExit; 0] otherwise
}
FiPeninsulaWalls_Dim :=
    [L_FiExit + L_FiOverflow + 2*T_PlantWall; T_PlantWall; H_FiEntrance] if EN_DoubleTrain == 0
    [T_PlantWall; L_FiExit + L_FiOverflow + 2*T_PlantWall; H_FiEntrance] otherwise
OtherWall :=
    [0; W_FiOverflow + T_PlantWall; 0] if EN_DoubleTrain == 0
    [W_FiOverflow + T_PlantWall; 0; 0] otherwise
PeninsulaWalls :=
    Peninsula ← layer_new("PeninsulaWalls", grey)
    Peninsula ← stack(Peninsula, BoxF(FiPeninsulaWalls_Origin, FiPeninsulaWalls_Origin + FiPeninsulaWalls_Dim, [0; 0; 0]*deg))
    Peninsula ← stack(Peninsula, BoxF(FiPeninsulaWalls_Origin - OtherWall, FiPeninsulaWalls_Origin - OtherWall + FiPeninsulaWalls_Dim, [0; 0; 0]*deg))
    return stack(Peninsula, FreezeLayer("PeninsulaWalls"))
WalkwayBlock :=
    Peninsula ← layer_new("WalkwayPeninsula", grey)
    Peninsula ← stack(Peninsula, BoxF(FiWalkway_Origin, FiWalkway_Origin + FiWalkway_Dim, [0; 0; 0]*deg))
    return stack(Peninsula, FreezeLayer("WalkwayPeninsula"))
Peninsula ← stack(Peninsula, Tank(FiWalkway_Origin + [-FiOverflowBox_Dim[0] - FiDistBox_Dim[0] - 3*T_PlantWall; 0; -T_PlantWall], [-FiDistBox_Dim[0] - 3*T_PlantWall; FiOverflowBox_Dim[1]; -(Z_Walkway - FiEntranceBox_origin[2])], T_PlantWall))
FiEntExitValvesPlus :=
    FiEntExitValves if N_Fi == 1
    stack(FiEntExitValves, FistopGateScript) if N_Fi > 1 and N_Fi ≠ 4
    stack(FiEntExitValves, FistopGateScript, WalkwayBlock, PeninsulaWalls) otherwise
# Adding Boxes to Show Heights of Water and Sand
FiWaterLayer := layer_new("FiWater", blue2)
Water_FiInletChannel := BoxF(FiInletChannel_Origin, FiInletChannel_Origin + [-W_FiInletChannel; L_FiInletChannel; ZW_FiInletChannel - FiInletChannel_Origin[2]], [0; 0; 0]*deg)
Water_FiEntranceBoxTerminal := BoxF(FiEntranceBox_origin, FiEntranceBox_origin + [-L_FiEntrance; W_FiEntrance; ZW_FiEntranceTerminal - FiEntranceBox_origin[2]], [0; 0; 0]*deg)
Water_FiBoxTerminal := BoxF(Fi_origin, Fi_origin + [-L_Fi; W_Fi; ZW_FiMax - Z_FiBottom], [0; 0; 0]*deg)
Water_FiEntranceBoxClean := BoxF(FiEntranceBox_origin, FiEntranceBox_origin + [-L_FiEntrance; W_FiEntrance; ZW_FiEntranceCleanForward - FiEntranceBox_origin[2]], [0; 0; 0]*deg)
Water_FiBoxClean := BoxF(Fi_origin, Fi_origin + [-L_Fi; W_Fi; ZW_FiClean - Z_FiBottom], [0; 0; 0]*deg)
Water_FiEntranceBoxBw := BoxF(FiEntranceBox_origin, FiEntranceBox_origin + [-L_FiEntrance; W_FiEntrance; ZW_FiEntranceBwSS - FiEntranceBox_origin[2]], [0; 0; 0]*deg)
Water_FiBoxBw := BoxF(Fi_origin, Fi_origin + [-L_Fi; W_Fi; ZW_FiBwSS - Z_FiBottom], [0; 0; 0]*deg)
FreezeFiWater := FreezeLayer("FiWater")
FiWaterTerminalScript := stack(FiWaterLayer, Water_FiInletChannel, Water_FiEntranceBoxTerminal, Water_FiBoxTerminal, FreezeFiWater)
FiWaterCleanScript := stack(FiWaterLayer, Water_FiInletChannel, Water_FiEntranceBoxClean, Water_FiBoxClean, FreezeFiWater)
FiWaterBwScript := stack(FiWaterLayer, Water_FiInletChannel, Water_FiEntranceBoxBw, Water_FiBoxBw, FreezeFiWater)
FiSandLayer := layer_new("FiSand", yellow)
Sand_FiBoxForward := BoxF(Fi_origin, Fi_origin + [-L_Fi; W_Fi; H_FiSand], [0; 0; 0]*deg)
Sand_FiBoxBw := BoxF(Fi_origin, Fi_origin + [-L_Fi; W_Fi; H_FiFluidizedBed], [0; 0; 0]*deg)
FreezeFiSand := FreezeLayer("FiSand")
FiSandForwardScript := stack(FiSandLayer, Sand_FiBoxForward, FreezeFiSand)
FiSandBwScript := stack(FiSandLayer, Sand_FiBoxBw, FreezeFiSand)
ThawAll := ThawMultiple(["Fi*Con"; "DrainChannelSideCon"])
MirrorFilters := Mirror3dAll("yz", [Floc_Origin[0] - L_Floc - W_PlantDC/2 - T_PlantWall; 0 m], "n")
FreezeAll := FreezeMultiple(["Fi*Con"; "DrainChannelSideCon"])
AC_FilterWaterTerminal := stack(FiInletChannelScript, FiTankScript, PlantDrainChannelScript, FiManifoldScript, FiAuxScript, FiSandDrainScript, FiSiphonScript, FiArrayScript, FiWeirScript, FiDistFinishScript, FiSiphonFinishScript, FiBoxDrainFinishScript, FiWaterTerminalScript, FiSandForwardScript)
AC_FilterWaterClean := stack(FiInletChannelScript, FiTankScript, PlantDrainChannelScript, FiManifoldScript, FiAuxScript, FiSandDrainScript, FiSiphonScript, FiArrayScript, FiWeirScript, FiDistFinishScript, FiSiphonFinishScript, FiBoxDrainFinishScript, FiWaterCleanScript, FiSandForwardScript)
AC_FilterWaterBw := stack(FiInletChannelScript, FiTankScript, PlantDrainChannelScript, FiManifoldScript, FiAuxScript, FiSandDrainScript, FiSiphonScript, FiArrayScript, FiWeirScript, FiDistFinishScript, FiSiphonFinishScript, FiBoxDrainFinishScript, FiWaterBwScript, FiSandBwScript)
AC_FilterWater :=
    AC_FilterWaterTerminal if EN_FilterWater == 0
    AC_FilterWaterClean if EN_FilterWater == 1
    AC_FilterWaterBw if EN_FilterWater == 2
AC_Filter :=
    stack(FiInletChannelScript, FiTankScript, PlantDrainChannelScript, FiManifoldScript, FiAuxScript, FiSandDrainScript, FiSiphonScript, FiArrayScript, FiWeirScript, FiDistFinishScript, FiSiphonFinishScript, FiBoxDrainFinishScript, FiEntExitValvesPlus) if EN_DoubleTrain == 0
    stack(FiInletChannelScript, FiTankScript, PlantDrainChannelScript, FiManifoldScript, FiAuxScript, FiSandDrainScript, FiSiphonScript, FiArrayScript, FiWeirScript, FiDistFinishScript, FiSiphonFinishScript, FiBoxDrainFinishScript, FiEntExitValvesPlus, ThawAll, MirrorFilters, FreezeAll) otherwise
AC_Filter :=
    AC_Filter if EN_Water == 0
    AC_FilterWater otherwise
AC_FilterMod := stack(FiInletChannelScriptMod, FiTankScript, FiManifoldScript, FiAuxScript, FiSandDrainScript, FiSiphonScript, FiArrayScript, FiWeirScript, FiDistFinishScript, FiBoxDrainFinishScript)
