Q_Plant := 20*L/s
# [reference: ExpertInputs.xmcd]
# [reference: MathFunctions.xmcd]
# [reference: PipeDatabase.xmcd]
# [reference: MaterialsDatabase.xmcd]
# [reference: FluidsFunctions.xmcd]
# [reference: SedTankFunctions.xmcd]
# [reference: CdcFunctions.xmcd]
# [reference: SedimentationTank.xmcd]
# [reference: Flocculator.xmcd]
# [reference: LFOM.xmcd]
# [reference: EntranceTank.xmcd]
# [reference: StackedRapidSandFilter.xmcd]
# [reference: LinearCdc.xmcd]
# [reference: ChemStorageTanks.xmcd]
# AutoCAD drawing programs:
# Translators:
# These are the codes that take MathCAD outputs and create AutoCAD scripts that are used to draw the plant (formerly Basics)
# [reference: MtoATranslators.xmcd]
# The wrapped MtoA translator contains the functions that the user will want to access. These functions will draw pieces with full functionality - specifying the location, dimension, and orientation of the object. Also, it contains layer control and subtraction capabilities for grouped objects.
# [reference: MtoATranslatorsWrapped.xmcd]
# Drawing functions:
# [reference: ChannelF.xmcd]
# [reference: PlumbingF.xmcd]
# [reference: TankF.xmcd]
# [reference: StairsF.xmcd]
# [reference: DrainChannelF.xmcd]
# AutoCAD Script Files:
# [reference: FlocculatorAC.xmcd]
# [reference: SedimentationTankAC.xmcd]
# [reference: EntranceTankAC.xmcd]
# [reference: ChemStockTanksAC.xmcd]
# Stacked Rapid Sand Filter
# Concrete Box and Plant Drain Channel Origin Points
Fi_origin := [
    Plant_Origin[0] - W_FiInletChannel - 5*T_PlantWall - T_FiWall - L_FiEntrance - L_FiExit - W_MpWalkway - L_Sed - W_PlantDC;
    Plant_Origin[1] + N_SedTanks*(W_Sed + T_PlantWall) - T_PlantWall - W_Fi/2 - ConRadius(ND_FiBwTrunk) - S_Fitting;
    Z_FiBottom
]
# The Y position is set so that the northern wall of the filter inlet channel aligns with the northern wall of the sed tanks (we want the inlet pipes to fit along the length of the inlet channel)
FiEntranceBox_origin := [
    Plant_Origin[0] - W_FiInletChannel - 2*T_PlantWall - L_Sed - W_PlantDC - T_ChannelWall;
    Fi_origin[1] + W_Fi/2 - W_FiEntrance + S_Fitting + ConRadius(ND_FiBwTrunk);
    Z_FiEntranceBottom
]
FiExitBox_origin := FiEntranceBox_origin + [-L_FiEntrance - T_ChannelWall; 0; 0]
FiInletChannel_Origin := [
    Plant_Origin[0] - L_Sed - 2*T_PlantWall - W_PlantDC;
    FiEntranceBox_origin[1] - L_FiInletChannel + W_FiEntrance;
    Z_FiInletChannelBottom
]
FiOverflowBox_Origin := [
    FiEntranceBox_origin[0];
    FiEntranceBox_origin[1] - T_ChannelWall - W_FiOverflow;
    Z_FiOverflowBottom
]
FiDistBox_Origin := [
    FiOverflowBox_Origin[0] - L_FiOverflow - T_ChannelWall;
    FiOverflowBox_Origin[1];
    FiExitBox_origin[2]
]
PlantDC_Origin := [
    Plant_Origin[0] - L_Sed - T_PlantWall - W_PlantDC;
    Plant_Origin[1] - T_PlantWall;
    Z_PlantUpperDCBottom + H_PlantDC
]
PlantLowerDC_Origin := [
    Plant_Origin[0] - L_Sed - T_PlantWall - W_PlantDC;
    Plant_Origin[1] - T_PlantWall;
    Z_PlantLowerDCBottom + H_PlantDC
]
PlantUpperDC_Origin := [
    Plant_Origin[0] - L_Sed - T_PlantWall - W_PlantDC;
    Fi_origin[1] + W_Fi;
    Z_PlantUpperDCBottom + H_PlantDC
]
# Coupling Origin Points
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# This will be the pipe layout in the entrance and exit boxes to allow for 2 90 degree elbows in  Pipes 2 and 3 coming from the entrance box (on the right)
FiInletCoupling1_origin := [
    FiEntranceBox_origin[0] - L_FiEntrance + T_ConcreteMin + ConRadius(ND_FiTrunk);
    FiEntranceBox_origin[1] + W_FiEntrance - ConRadius(ND_FiBwTrunk) - S_Fitting;
    FiEntranceBox_origin[2] - CouplingLength(ND_FiTrunk) + SocketDepth(ND_FiTrunk)
]
FiBwInletCoupling_origin := [
    FiInletCoupling1_origin[0] + L_FiOverflowWeir - S_Fitting - 2*ConRadius(ND_FiBwTrunk);
    FiInletCoupling1_origin[1];
    FiEntranceBox_origin[2] - CouplingLength(ND_FiBwTrunk) + SocketDepth(ND_FiBwTrunk)
]
FiInletCoupling2_origin := [
    FiEntranceBox_origin[0] - L_FiEntrance + L_FiOverflowWeir - (ConRadius(ND_FiTrunk) + S_Fitting);
    FiEntranceBox_origin[1] + 2*T_ConcreteMin + 3*ConRadius(ND_FiTrunk);
    FiInletCoupling1_origin[2]
]
FiInletCoupling3_origin := [
    FiEntranceBox_origin[0] - L_FiEntrance + T_ConcreteMin + ConRadius(ND_FiTrunk);
    FiEntranceBox_origin[1] + 2*T_ConcreteMin + 3*ConRadius(ND_FiTrunk);
    FiEntranceBox_origin[2] - CouplingLength(ND_FiTrunk) + SocketDepth(ND_FiTrunk)
]
FiExitCoupling0_origin := [
    FiExitBox_origin[0] - T_ConcreteMin - ConRadius(ND_FiTrunk);
    FiInletCoupling1_origin[1];
    FiExitBox_origin[2] - CouplingLength(ND_FiTrunk) + SocketDepth(ND_FiTrunk)
]
FiExitCoupling1_origin := [
    (FiExitBox_origin[0] - L_FiExit + T_ConcreteMin) + ConRadius(ND_FiTrunk);
    FiInletCoupling1_origin[1];
    FiExitBox_origin[2] - CouplingLength(ND_FiTrunk) + SocketDepth(ND_FiTrunk)
]
FiExitCoupling2_origin := [
    (FiExitBox_origin[0] - L_FiExit + T_ConcreteMin) + ConRadius(ND_FiExitWaste);
    FiExitBox_origin[1] + T_ConcreteMin + ConRadius(ND_FiTrunk);
    FiExitBox_origin[2] - CouplingLength(ND_FiTrunk) + SocketDepth(ND_FiTrunk)
]
FiExitCoupling3_origin := [
    FiExitBox_origin[0] - T_ConcreteMin - ConRadius(ND_FiTrunk);
    FiExitBox_origin[1] + T_ConcreteMin + ConRadius(ND_FiTrunk);
    FiExitBox_origin[2] - CouplingLength(ND_FiExitWaste) + SocketDepth(ND_FiExitWaste)
]
FiFerncoBwCoupling_origin := [Fi_origin[0]; FiBwInletCoupling_origin[1]; Fi_origin[2] + outerradius(ND_FiBwManBranch)]
FiFerncoCouplings_origin := [Fi_origin[0]; FiFerncoBwCoupling_origin[1]; FiFerncoBwCoupling_origin[2] + H_FiBottomLayer]
FiWallBwCoupling_origin := [
    Fi_origin[0] + T_FiWall + CouplingLength(ND_FiBwTrunk) - SocketDepth(ND_FiBwTrunk);
    FiBwInletCoupling_origin[1];
    Fi_origin[2] + outerradius(ND_FiBwManBranch)
]
FiWallCouplings_origin := [
    Fi_origin[0] + T_FiWall + CouplingLength(ND_FiTrunk) - SocketDepth(ND_FiTrunk);
    FiBwInletCoupling_origin[1];
    Fi_origin[2] + outerradius(ND_FiBwManBranch) + H_FiBottomLayer
]
# Concrete Box Dimensions
FiEntranceBox_dim := [L_FiEntrance; W_FiEntrance; H_FiEntrance]
FiExitBox_dim := [L_FiExit; W_FiEntrance; H_FiEntrance]
Fi_dim := [L_Fi; W_Fi; H_Fi] = [0.882393; 1.24933; 4.41479] m
FiOverflowBox_Dim := [L_FiOverflow; W_FiOverflow; H_FiOverflow]
FiDistBox_Dim := [L_FiExit; W_FiOverflow; H_FiEntrance]
# Inlet Channel
# Origins and Dimensions
FiInletCoupling_Origin(N) := [
    FiInletChannel_Origin[0] + CouplingLength(ND_FiEntrancePipe) - SocketDepth(ND_FiEntrancePipe);
    SedOutletCoupling2_Origin(N)[1];
    SedOutletCoupling2_Origin(N)[2]
]
L_FiInletPipe := SedOutletCoupling2_Origin(1)[0] - CouplingLength(ND_FiEntrancePipe) + 2*SocketDepth(ND_FiEntrancePipe) - FiInletCoupling_Origin(1)[0]
# Inlet Channel Concrete
LayerFiInletChannel := layer_new("FiInletChannelCon", grey)
FiInletChannel := Tank(FiInletChannel_Origin, [W_FiInletChannel; L_FiInletChannel; H_FiInletChannel], T_PlantWall)
FreezeFiInletChannel := FreezeLayer("FiInletChannelCon")
FiInletChannelConScript := stack(LayerFiInletChannel, FiInletChannel, FreezeFiInletChannel)
# Inlet Channel Coupling(s)
FiInletFittingLayer := layer_new("FiInletFittingsPlu", green)
FiInletFittingFrz := FreezeLayer("FiInletFittingsPlu")
FiInletCouplingScript :=
    Local ← FiInletFittingLayer
    for i ∈ 1 .. N_FiEntrancePipes
        Local ← stack(Local, CouplingSUBF(FiInletCoupling_Origin(i), [0; 0]*deg, ND_FiEntrancePipe, PS_Default, ["FiInletChannelCon"]))
    return stack(Local, FiInletFittingFrz)
# Inlet Pipes from Sedimentation
FiInletPipeLayer := layer_new("FiInletPipePlu", blue)
FiInletPipeFrz := FreezeLayer("FiInletPipePlu")
FiInletPipe :=
    Local ← FiInletPipeLayer
    for i ∈ 1 .. N_FiEntrancePipes
        Local ← stack(Local, PipeSUBF([
            SedOutletCoupling2_Origin(i)[0] - CouplingLength(ND_FiEntrancePipe) + 2*SocketDepth(ND_FiEntrancePipe);
            SedOutletCoupling2_Origin(i)[1];
            SedOutletCoupling2_Origin(i)[2]
        ], L_FiInletPipe, [0; 0]*deg, ND_FiEntrancePipe, PS_Default, ["FiInletChannelCon"]))
    return Local
FiInletPipeScript := stack(FiInletPipeLayer, FiInletPipe, FiInletPipeFrz)
FiInletChannelScript := stack(FiInletChannelConScript, FiInletCouplingScript, FiInletPipeScript)
# Filter Box Concrete
LayerFiTank := layer_new("FiTankCon", grey)
FiTank := Tank(Fi_origin, Fi_dim, T_FiWall)
FiSiphonManLedgeL := BoxF([
    Fi_origin[0];
    Fi_origin[1] + T_ConcreteMin + ConRadius(ND_FiSiphon) - 2*S_Fitting;
    Z_FiSiphonInlet - ConRadius(ND_FiSiphon) - outerradius(ND_FiSiphon)
], [
    Fi_origin[0] - T_ConcreteMin;
    Fi_origin[1] + T_ConcreteMin + ConRadius(ND_FiSiphon) + 2*S_Fitting;
    Z_FiSiphonInlet - ConRadius(ND_FiSiphon) - outerradius(ND_FiSiphon) - T_ConcreteMin
], [0; 0; 0]*deg)
FiSiphonManLedgeR := BoxF([
    Fi_origin[0] - L_Fi;
    Fi_origin[1] + T_ConcreteMin + ConRadius(ND_FiSiphon) - 2*S_Fitting;
    Z_FiSiphonInlet - ConRadius(ND_FiSiphon) - outerradius(ND_FiSiphon)
], [
    Fi_origin[0] - L_Fi + T_ConcreteMin;
    Fi_origin[1] + T_ConcreteMin + ConRadius(ND_FiSiphon) + 2*S_Fitting;
    Z_FiSiphonInlet - ConRadius(ND_FiSiphon) - outerradius(ND_FiSiphon) - T_ConcreteMin
], [0; 0; 0]*deg)
LayerFiTankFreeze := FreezeLayer("FiTankCon")
FiTankScript := stack(LayerFiTank, FiTank, FiSiphonManLedgeL, FiSiphonManLedgeR, Union_All, LayerFiTankFreeze)
# Plant Drain Channel
MainDCLayer := layer_new("DrainChannelCon", grey)
L_PlantLowerDC := Fi_origin[1] + W_Fi - Plant_Origin[1] - T_ChannelWall + T_PlantWall = 7.1572 m
L_PlantUpperDC := Et_Origin[1] + W_Et - Fi_origin[1] - W_Fi - T_ChannelWall + T_PlantWall = 4.73417 m
MainDCLower := DrainChannelF(PlantLowerDC_Origin, [270; 0; 0]*deg, Q_PlantDCMax, W_PlantDC, H_PlantDC, L_PlantLowerDC, Slope_PlantDC, Nu_Water, E_Concrete, 1)
MainDCUpper := DrainChannelF(PlantUpperDC_Origin, [270; 0; 0]*deg, Q_PlantDCMax, W_PlantDC, H_PlantDC, L_PlantUpperDC, Slope_PlantDC, Nu_Water, E_Concrete, 1)
MainDC := DrainChannelF(PlantDC_Origin, [270; 0; 0]*deg, Q_PlantDCMax, W_PlantDC, H_PlantDC, L_PlantDC, Slope_PlantDC, Nu_Water, E_Concrete, 1)
MainDCScript :=
    stack(MainDCLayer, MainDC) if Z_PlantLowerDCBottom > Z_PlantUpperDCBottom - Slope_PlantDC*L_PlantUpperDC - 10 cm
    stack(MainDCLayer, MainDCLower, MainDCUpper) otherwise
DCWestWallLower := BoxF([
    Plant_Origin[0] - L_Sed - T_PlantWall - W_PlantDC;
    Plant_Origin[1] - T_PlantWall;
    PlantLowerDC_Origin[2]
], [
    Plant_Origin[0] - L_Sed - W_PlantDC - T_PlantWall - T_ChannelWall;
    PlantLowerDC_Origin[1] + L_PlantLowerDC + T_ChannelWall;
    Z_Walkway - T_Floor
], [0; 0; 0]*deg)
DCWestWallUpper := BoxF([Plant_Origin[0] - L_Sed - T_PlantWall - W_PlantDC; PlantUpperDC_Origin[1]; PlantUpperDC_Origin[2]], [
    Plant_Origin[0] - L_Sed - W_PlantDC - T_PlantWall - T_ChannelWall;
    Plant_Origin[1] - T_PlantWall + L_PlantDC + T_ChannelWall;
    Z_Walkway - T_Floor
], [0; 0; 0]*deg)
DCEastWallLower := BoxF([Plant_Origin[0] - L_Sed - T_PlantWall; Plant_Origin[1] - T_PlantWall; PlantLowerDC_Origin[2]], [
    Plant_Origin[0] - L_Sed + T_ChannelWall - T_PlantWall;
    PlantLowerDC_Origin[1] + L_PlantLowerDC + T_ChannelWall;
    Z_Walkway - T_Floor
], [0; 0; 0]*deg)
DCEastWallUpper := BoxF([Plant_Origin[0] - L_Sed - T_PlantWall; PlantUpperDC_Origin[1]; PlantUpperDC_Origin[2]], [
    Plant_Origin[0] - L_Sed + T_ChannelWall - T_PlantWall;
    Plant_Origin[1] - T_PlantWall + L_PlantDC + T_ChannelWall;
    Z_Walkway - T_Floor
], [0; 0; 0]*deg)
DCNorthWall := BoxF([Plant_Origin[0] - L_Sed; Plant_Origin[1] - T_ChannelWall + L_PlantDC; PlantUpperDC_Origin[2]], [
    Plant_Origin[0] - L_Sed - T_ChannelWall - W_PlantDC - T_PlantWall;
    Plant_Origin[1] + L_PlantDC;
    Z_Walkway - T_Floor
], [0; 0; 0]*deg)
DCDropoffWall := BoxF([
    Plant_Origin[0] - L_Sed - T_PlantWall + T_ChannelWall;
    PlantLowerDC_Origin[1] + L_PlantLowerDC;
    PlantLowerDC_Origin[2]
], [
    Plant_Origin[0] - L_Sed - T_PlantWall - W_PlantDC - T_ChannelWall;
    PlantLowerDC_Origin[1] + L_PlantLowerDC + T_ChannelWall;
    PlantUpperDC_Origin[2] - H_PlantDC - Slope_PlantDC*L_PlantUpperDC
], [0; 0; 0]*deg)
DrainChannelRMRecessWalls := BoxF([
    Plant_Origin[0] - L_Sed - T_PlantWall;
    Et_Origin[1] + W_Et + T_PlantWall;
    PlantUpperDC_Origin[2] - T_ChannelWall - H_PlantDC
], [
    FlocCoupling_Origin[0] + ConRadius(ND_RMPipe) + S_Fitting + T_ChannelWall;
    Floc_Origin[1] + N_FlocChannels*(W_FlocChannel + T_FlocChannelWall) - T_FlocChannelWall + T_PlantWall - T_ChannelWall;
    Z_Walkway - T_Floor
], [0; 0; 0]*deg)
FrzDrainChannel := FreezeLayer("DrainChannelCon")
FiInletChannelDCCutout := BoxF([
    Plant_Origin[0] - L_Sed - T_PlantWall - W_PlantDC;
    FiInletChannel_Origin[1] - T_PlantWall;
    FiInletChannel_Origin[2] - T_PlantWall
], [
    Plant_Origin[0] - L_Sed - W_PlantDC - 2*T_PlantWall;
    FiInletChannel_Origin[1] + T_PlantWall + L_FiInletChannel;
    Z_Walkway - T_Floor
], [0; 0; 0]*deg)
SedDCCutout := BoxF([Plant_Origin[0] - L_Sed; Plant_Origin[1] - T_PlantWall; Plant_Origin[2] - T_PlantWall], [
    Plant_Origin[0] - L_Sed - T_PlantWall;
    Plant_Origin[1] + W_Sed*N_SedTanks + T_SedWallDivider*N_SedTanks - T_SedWallDivider + T_PlantWall;
    Z_Walkway - T_Floor
], [0; 0; 0]*deg)
DrainChannelRMRecessCutout1 := BoxF([
    Plant_Origin[0] - L_Sed - T_PlantWall;
    Et_Origin[1] + W_Et + T_PlantWall - T_ChannelWall;
    PlantUpperDC_Origin[2] - H_PlantDC
], [
    FlocCoupling_Origin[0] + ConRadius(ND_RMPipe) + S_Fitting;
    Floc_Origin[1] + N_FlocChannels*(W_FlocChannel + T_FlocChannelWall) - T_FlocChannelWall + T_PlantWall;
    Z_Walkway - T_Floor + zc
], [0; 0; 0]*deg)
EtDrainChannelCutout := BoxF([
    FlocCoupling_Origin[0] + ConRadius(ND_RMPipe) + S_Fitting;
    EtDC_Origin[1] + W_EtDC;
    Et_Origin[2] - T_PlantWall
], [
    FlocCoupling_Origin[0] + ConRadius(ND_RMPipe) + S_Fitting + T_ChannelWall;
    EtDC_Origin[1];
    EtDC_Origin[2] - H_EtDC - Slope_EtDC*L_EtDC
], [0; 0; 0]*deg)
DrainChannelBoxCutout := BoxF([
    Plant_Origin[0] - L_Sed - T_PlantWall - W_PlantDC;
    PlantUpperDC_Origin[1];
    Z_PlantUpperDCBottom - Slope_PlantDC*L_PlantUpperDC
], [Plant_Origin[0] - L_Sed - T_PlantWall; PlantUpperDC_Origin[1] - T_PlantWall; Plant_Origin[2]], [0; 0; 0]*deg)
DrainChannelWedgeCutout := WedgeF([
    Plant_Origin[0] - L_Sed - T_PlantWall;
    PlantUpperDC_Origin[1] - T_ChannelWall;
    Z_PlantUpperDCBottom - Slope_PlantDC*L_PlantUpperDC
], [
    Plant_Origin[0] - L_Sed - T_PlantWall - T_ChannelWall;
    PlantUpperDC_Origin[1] - T_ChannelWall - W_PlantDC;
    Z_PlantUpperDCBottom - Slope_PlantDC*(L_PlantUpperDC + T_ChannelWall)
], [270; 0; 0]*deg)
EtRMDCCutout := CylinderF(FlocCoupling_Origin + [0; -SocketDepth(ND_RMPipe); 0], outerradius(ND_RMPipe), 2*T_ChannelWall, [270; 0]*deg)
SubtractDCCutouts := SubtractF(["DrainChannelCon"], "DeleteMe")
DCUpperWalls :=
    stack(DCWestWallLower, DCWestWallUpper, DCEastWallLower, DCEastWallUpper, DCNorthWall, DrainChannelRMRecessWalls, Union_All, FrzDrainChannel) if Z_PlantLowerDCBottom > Z_PlantUpperDCBottom - Slope_PlantDC*L_PlantUpperDC - 10 cm
    stack(DCWestWallLower, DCWestWallUpper, DCEastWallLower, DCEastWallUpper, DCNorthWall, DCDropoffWall, DrainChannelRMRecessWalls, Union_All, FrzDrainChannel) otherwise
DCWallCutouts := stack(FiInletChannelDCCutout, SedDCCutout, DrainChannelRMRecessCutout1, DrainChannelBoxCutout, DrainChannelWedgeCutout, EtDrainChannelCutout, EtRMDCCutout, GroupDelete, SubtractDCCutouts)
PlantDrainChannelScript := stack(MainDCScript, DCUpperWalls, DCWallCutouts)
# Filter Box Manifold Connections: Fernco Couplings, Outer Wall Couplings, and Through-wall Pipes
# Fernco Couplings
LayerFiFernco := layer_new("FiFerncoCouplingsPlu", purple)
FiFerncoBwCoupling := FerncoCouplingF(FiFerncoBwCoupling_origin, [0; 0; 0]*deg, ND_FiBwTrunk, L_FiManFerncoCoupling)
FiFerncoCoupling := FerncoCouplingF(FiFerncoCouplings_origin, [0; 0; 0]*deg, ND_FiTrunk, L_FiManFerncoCoupling)
ArrayFiManifoldLast := ArrayLast(N_FiLayer, 1, H_FiLayer)
LayerFiFerncoFreeze := FreezeLayer("FiFerncoCouplingsPlu")
FiFerncoScript := stack(LayerFiFernco, FiFerncoBwCoupling, FiFerncoCoupling, view("f"), ArrayFiManifoldLast, view("t"), LayerFiFerncoFreeze)
# Filter Wall Couplings
LayerFiFittingPlu := layer_new("FiFittingsPlu", green)
FiWallBwCoupling := CouplingF(FiWallBwCoupling_origin, [0; 0]*deg, ND_FiBwTrunk, PS_Default)
FiWallCoupling := CouplingF(FiWallCouplings_origin, [0; 0]*deg, ND_FiTrunk, PS_Default)
LayerFiFittingFrz := FreezeLayer("FiFittingsPlu")
FiWallCouplingScript := stack(LayerFiFittingPlu, FiWallBwCoupling, FiWallCoupling, view("f"), ArrayFiManifoldLast, view("t"), LayerFiFittingFrz)
# Through-wall Pipes
LayerFiPipePlu := layer_new("FiPipePlu", blue)
FiBwConPipe := PipeSUBF(FiWallBwCoupling_origin - [CouplingLength(ND_FiBwTrunk) - 2*SocketDepth(ND_FiBwTrunk); 0 m; 0 m], L_FiManFerncoCoupling/2 + T_FiWall + SocketDepth(ND_FiBwTrunk), [0; 0; 0]*deg, ND_FiBwTrunk, PS_Default, ["FiTankCon"])
FiConPipe1 := PipeSUBF(FiWallCouplings_origin + [-CouplingLength(ND_FiTrunk) + 2*SocketDepth(ND_FiTrunk); 0 m; 0 m], L_FiManFerncoCoupling/2 + T_FiWall + SocketDepth(ND_FiTrunk), [0; 0; 0]*deg, ND_FiTrunk, PS_Default, ["FiTankCon"])
FiConPipe2 := PipeSUBF(FiWallCouplings_origin + [-CouplingLength(ND_FiTrunk) + 2*SocketDepth(ND_FiTrunk); 0 m; H_FiLayer], L_FiManFerncoCoupling/2 + T_FiWall + SocketDepth(ND_FiTrunk), [0; 0; 0]*deg, ND_FiTrunk, PS_Default, ["FiTankCon"])
FiConPipe3 := PipeSUBF(FiWallCouplings_origin + [-CouplingLength(ND_FiTrunk) + 2*SocketDepth(ND_FiTrunk); 0 m; 2*H_FiLayer], L_FiManFerncoCoupling/2 + T_FiWall + SocketDepth(ND_FiTrunk), [0; 0; 0]*deg, ND_FiTrunk, PS_Default, ["FiTankCon"])
FiConPipe4 := PipeSUBF(FiWallCouplings_origin + [-CouplingLength(ND_FiTrunk) + 2*SocketDepth(ND_FiTrunk); 0 m; 3*H_FiLayer], L_FiManFerncoCoupling/2 + T_FiWall + SocketDepth(ND_FiTrunk), [0; 0; 0]*deg, ND_FiTrunk, PS_Default, ["FiTankCon"])
FiConPipe5 := PipeSUBF(FiWallCouplings_origin + [-CouplingLength(ND_FiTrunk) + 2*SocketDepth(ND_FiTrunk); 0 m; 4*H_FiLayer], L_FiManFerncoCoupling/2 + T_FiWall + SocketDepth(ND_FiTrunk), [0; 0; 0]*deg, ND_FiTrunk, PS_Default, ["FiTankCon"])
FiConPipe6 := PipeSUBF(FiWallCouplings_origin + [-CouplingLength(ND_FiTrunk) + 2*SocketDepth(ND_FiTrunk); 0 m; 5*H_FiLayer], L_FiManFerncoCoupling/2 + T_FiWall + SocketDepth(ND_FiTrunk), [0; 0; 0]*deg, ND_FiTrunk, PS_Default, ["FiTankCon"])
LayerFiPipeFrz := FreezeLayer("FiPipePlu")
FiWallPipeScript := stack(LayerFiPipePlu, FiBwConPipe, FiConPipe1, FiConPipe2, FiConPipe3, FiConPipe4, FiConPipe5, FiConPipe6, LayerFiPipeFrz)
FiManWallScript := stack(FiFerncoScript, FiWallCouplingScript, FiWallPipeScript)
# Manifold Trunks and Branch Receivers
# Branch Receivers
LayerFiManPipe := layer_new("FiManPipePlu", blue)
FiBranchHolder := PipeF([
    Fi_origin[0] - CapThickness(ND_FiBranchHolder) - S_FiManAssembly;
    Fi_origin[1] + ConRadius(ND_FiBwBranchHolder) + S_FiManAssembly;
    Fi_origin[2] + H_FiBottomLayer + outerradius(ND_FiBwManBranch)
], L_Fi - 2*CapThickness(ND_FiBranchHolder) - 2*S_FiManAssembly, [0; 0]*deg, ND_FiBranchHolder, PS_Default)
LayerFiManCaps := layer_new("FiManCapPlu", green)
FiBranchHolderCapRight := CapF([
    Fi_origin[0] - CapThickness(ND_FiBranchHolder) - S_FiManAssembly;
    Fi_origin[1] + ConRadius(ND_FiBwBranchHolder) + S_FiManAssembly;
    Fi_origin[2] + H_FiBottomLayer + outerradius(ND_FiBwManBranch)
], [0; 0]*deg, ND_FiBranchHolder)
FiBranchHolderCapLeft := CapF([
    Fi_origin[0] - L_Fi + S_FiManAssembly + CapThickness(ND_FiBranchHolder);
    Fi_origin[1] + ConRadius(ND_FiBwBranchHolder) + S_FiManAssembly;
    Fi_origin[2] + H_FiBottomLayer + outerradius(ND_FiBwManBranch)
], [180; 0]*deg, ND_FiBranchHolder)
R_CircleCutOut := .75 in
ND := 2 in
EN := PS_Default
L_CircleCutOut := 2*outerdiameter(ND)
# Spacer 1:
LayerFiBranchManRecieverTopTee1 := layer_new("TopTee1", red)
X_TopTee1 := -10*CapThickness(ND_FiBranchHolder) + (-TeeLength(ND)/2) + Fi_origin[0] + (-L_FiManFerncoCoupling - B_FiManifoldBranch/2)
Y_TopTee1 := Fi_origin[1] + S_FiManAssembly + ConRadius(ND_FiBwBranchHolder) + outerradius(ND_FiBranchHolder) - L_FiManBranchExt
Z_TopTee1 := Fi_origin[2] + outerradius(ND_FiBwManBranch) + (-ShortTeeLength(ND)) + H_FiBottomLayer
TopTee1_Origin := [X_TopTee1; Y_TopTee1; Z_TopTee1]
FiBranchManReceiverTopTee1 := TeeF(TopTee1_Origin, [0; 0; -90]*deg, ND, EN)
FrzFiBranchManReceiverTopTee1 := FreezeLayer("TopTee1")
DrawFiBranchManReaceiverTopTee1 := stack(LayerFiBranchManRecieverTopTee1, FiBranchManReceiverTopTee1, FrzFiBranchManReceiverTopTee1)
Y_BoxCutOut1 := Y_TopTee1 - (2*ShortTeeLength(ND))
X_BoxCutOut1 := X_TopTee1 - SocketDepth(ND) - (TeeLength(ND)/2)
Z_BoxCutOut1 := Z_TopTee1 + ShortTeeLength(ND) + outerdiameter(ND)
BoxCutOut1_Origin := [X_BoxCutOut1; Y_BoxCutOut1; Z_BoxCutOut1]
BoxCutOut1_FarPoint := [-X_BoxCutOut1; Y_TopTee1 + (2*ShortTeeLength(ND)); Z_TopTee1 + ShortTeeLength(ND)]
BoxCutOut1 := BoxF(BoxCutOut1_Origin, BoxCutOut1_FarPoint, [0; 0; 0]*deg)
CircleCutOut1_Origin := [X_TopTee1; Y_TopTee1 + outerdiameter(ND)/2; Z_TopTee1 + ShortTeeLength(ND)]
CircleCutOut1 := CylinderF(CircleCutOut1_Origin, R_CircleCutOut, L_CircleCutOut, [90; 0]*deg)
SubtractBoxandCircle1 := SubtractF(["TopTee1"], "DeleteMe")
DrawUpperTee1 := stack(LayerFiBranchManRecieverTopTee1, FiBranchManReceiverTopTee1, FrzFiBranchManReceiverTopTee1, BoxCutOut1, CircleCutOut1, GroupDelete, SubtractBoxandCircle1)
LayerFiBranchManRecieverMiddlePipe1 := layer_new("MiddlePipe1", blue)
X_MiddlePipe1 := X_TopTee1
Y_MiddlePipe1 := Y_TopTee1
Z_MiddlePipe1 := Z_TopTee1
L_MiddlePipe := -(H_FiLayer - 2*ShortTeeLength(ND) - 4.5*SocketDepth(ND))
MiddlePipe1_Origin := [X_MiddlePipe1; Y_MiddlePipe1; Z_MiddlePipe1]
CreateMiddlePipe1 := PipeF(MiddlePipe1_Origin, L_MiddlePipe, [180; 90]*deg, ND, EN)
FrzLayerFiBranchManRecieverMiddlePipe1 := FreezeLayer("MiddlePipe1")
DrawMiddlePipe1 := stack(LayerFiBranchManRecieverMiddlePipe1, CreateMiddlePipe1, FrzLayerFiBranchManRecieverMiddlePipe1)
LayerFiBranchManRecieverLowerTee1 := layer_new("LowerTee1", red)
X_LowerTee1 := X_TopTee1
Y_LowerTee1 := Y_TopTee1
Z_LowerTee1 := Z_TopTee1 - L_MiddlePipe
LowerTee1_Origin := [X_LowerTee1; Y_LowerTee1; Z_LowerTee1]
CreateLowerTee1 := TeeF(LowerTee1_Origin, [0; 0; 90]*deg, ND, EN)
FrzLayerFiBranchManRecieverLowerTee1 := FreezeLayer("LowerTee1")
X_LowerBoxCutOut1 := X_LowerTee1 - SocketDepth(ND) - TeeLength(ND)/2
Y_LowerBoxCutOut1 := Y_LowerTee1 + 2*ShortTeeLength(ND)
Z_LowerBoxCutOut1 := Z_LowerTee1 - ShortTeeLength(ND)
LowerBoxCutOut1_FarPoint := [-X_LowerBoxCutOut1; Y_LowerTee1 - 2*ShortTeeLength(ND); Z_LowerTee1 - 2*ShortTeeLength(ND)]
LowerBoxCutOut1_Origin := [X_LowerBoxCutOut1; Y_LowerBoxCutOut1; Z_LowerBoxCutOut1]
LowerBoxCutOut1 := BoxF(LowerBoxCutOut1_Origin, LowerBoxCutOut1_FarPoint, [0; 0; 0]*deg)
LowerCircleCutOut1_Origin := [X_LowerTee1; Y_LowerTee1 + outerdiameter(ND)/2; Z_LowerTee1 - ShortTeeLength(ND)]
LowerCircleCutOut1 := CylinderF(LowerCircleCutOut1_Origin, R_CircleCutOut, L_CircleCutOut, [90; 0]*deg)
SubtractLowerBoxandCircle1 := SubtractF(["LowerTee1"], "DeleteMe")
DrawLowerTee1 := stack(LayerFiBranchManRecieverLowerTee1, CreateLowerTee1, FrzLayerFiBranchManRecieverLowerTee1, LowerBoxCutOut1, LowerCircleCutOut1, GroupDelete, SubtractLowerBoxandCircle1)
# Hose Clamps:
LayerHoseClamp1 := layer_new("HoseClamp1", green)
R_Clamp := (outerdiameter(ND)/2) + T_Pipe(ND, EN)
T_Clamp := 1/8*in
R_InsideClamp := R_Clamp - T_Clamp
L_Clamp := .25 in
HoseClamp1_Origin2 := [X_LowerTee1 - (TeeLength(ND)/2); Y_LowerTee1; Z_LowerTee1 - ShortTeeLength(ND) - T_Pipe(ND, EN)]
HoseClamp1_Origin1 := [X_LowerTee1 + (TeeLength(ND)/2); Y_LowerTee1; Z_LowerTee1 - ShortTeeLength(ND) - T_Pipe(ND, EN)]
HoseClamp1Outer1 := CylinderF(HoseClamp1_Origin1, R_Clamp, L_Clamp, [0; 0]*deg)
HoseClamp1Outer2 := CylinderF(HoseClamp1_Origin2, R_Clamp, L_Clamp, [0; 0]*deg)
FrzLayerHoseClamp1 := FreezeLayer("HoseClamp1")
HoseClamp1Inner1 := CylinderF(HoseClamp1_Origin1, R_InsideClamp, L_Clamp, [0; 0]*deg)
HoseClamp1Inner2 := CylinderF(HoseClamp1_Origin2, R_InsideClamp, L_Clamp, [0; 0]*deg)
SubtractInner1 := SubtractF(["HoseClamp1"], "DeleteMe")
DrawHoseClamps1 := stack(LayerHoseClamp1, HoseClamp1Outer1, HoseClamp1Outer2, FrzLayerHoseClamp1, HoseClamp1Inner1, HoseClamp1Inner2, GroupDelete, SubtractInner1)
DrawFiBranchManReceiver1 := stack(DrawUpperTee1, DrawMiddlePipe1, DrawLowerTee1, DrawHoseClamps1)
LayerFiBranchManRecieverTopTee2 := layer_new("TopTee2", red)
X_TopTee2 := X_TopTee1 + 2*SocketDepth(ND) + 2*TeeLength(ND) - L_Fi + 8*CapThickness(ND_FiBranchHolder)
Y_TopTee2 := Fi_origin[1] + S_FiManAssembly + ConRadius(ND_FiBwBranchHolder) + outerradius(ND_FiBranchHolder) - L_FiManBranchExt
Z_TopTee2 := Fi_origin[2] + outerradius(ND_FiBwManBranch) + (-ShortTeeLength(ND)) + H_FiBottomLayer
TopTee2_Origin := [X_TopTee2; Y_TopTee2; Z_TopTee2]
FiBranchManReceiverTopTee2 := TeeF(TopTee2_Origin, [0; 0; -90]*deg, ND, EN)
FrzFiBranchManReceiverTopTee2 := FreezeLayer("TopTee2")
DrawFiBranchManReaceiverTopTee2 := stack(LayerFiBranchManRecieverTopTee2, FiBranchManReceiverTopTee2, FrzFiBranchManReceiverTopTee2)
Y_BoxCutOut2 := Y_TopTee2 - (2*ShortTeeLength(ND))
X_BoxCutOut2 := X_TopTee2 - SocketDepth(ND) - (TeeLength(ND)/2)
Z_BoxCutOut2 := Z_TopTee2 + ShortTeeLength(ND) + outerdiameter(ND)
BoxCutOut2_Origin := [X_BoxCutOut2; Y_BoxCutOut2; Z_BoxCutOut2]
BoxCutOut2_FarPoint := [-X_BoxCutOut2; Y_TopTee2 + (2*ShortTeeLength(ND)); Z_TopTee2 + ShortTeeLength(ND)]
BoxCutOut2 := BoxF(BoxCutOut2_Origin, BoxCutOut2_FarPoint, [0; 0; 0]*deg)
CircleCutOut2_Origin := [X_TopTee2; Y_TopTee2 + outerdiameter(ND)/2; Z_TopTee2 + ShortTeeLength(ND)]
CircleCutOut2 := CylinderF(CircleCutOut2_Origin, R_CircleCutOut, L_CircleCutOut, [90; 0]*deg)
SubtractBoxandCircle2 := SubtractF(["TopTee2"], "DeleteMe")
DrawUpperTee2 := stack(LayerFiBranchManRecieverTopTee2, FiBranchManReceiverTopTee2, FrzFiBranchManReceiverTopTee2, BoxCutOut2, CircleCutOut2, GroupDelete, SubtractBoxandCircle2)
LayerFiBranchManRecieverMiddlePipe2 := layer_new("MiddlePipe2", blue)
X_MiddlePipe2 := X_TopTee2
Y_MiddlePipe2 := Y_TopTee2
Z_MiddlePipe2 := Z_TopTee2
MiddlePipe2_Origin := [X_MiddlePipe2; Y_MiddlePipe2; Z_MiddlePipe2]
CreateMiddlePipe2 := PipeF(MiddlePipe2_Origin, L_MiddlePipe, [180; 90]*deg, ND, EN)
FrzLayerFiBranchManRecieverMiddlePipe2 := FreezeLayer("MiddlePipe2")
DrawMiddlePipe2 := stack(LayerFiBranchManRecieverMiddlePipe2, CreateMiddlePipe2, FrzLayerFiBranchManRecieverMiddlePipe2)
LayerFiBranchManRecieverLowerTee2 := layer_new("LowerTee2", red)
X_LowerTee2 := X_TopTee2
Y_LowerTee2 := Y_TopTee2
Z_LowerTee2 := Z_MiddlePipe2 - L_MiddlePipe
LowerTee2_Origin := [X_LowerTee2; Y_LowerTee2; Z_LowerTee2]
CreateLowerTee2 := TeeF(LowerTee2_Origin, [0; 0; 90]*deg, ND, EN)
FrzLayerFiBranchManRecieverLowerTee2 := FreezeLayer("LowerTee2")
X_LowerBoxCutOut2 := X_LowerTee2 - SocketDepth(ND) - TeeLength(ND)/2
Y_LowerBoxCutOut2 := Y_LowerTee2 + 2*ShortTeeLength(ND)
Z_LowerBoxCutOut2 := Z_LowerTee2 - ShortTeeLength(ND)
LowerBoxCutOut2_FarPoint := [-X_LowerBoxCutOut2; Y_LowerTee2 - 2*ShortTeeLength(ND); Z_LowerTee2 - 2*ShortTeeLength(ND)]
LowerBoxCutOut2_Origin := [X_LowerBoxCutOut2; Y_LowerBoxCutOut2; Z_LowerBoxCutOut2]
LowerBoxCutOut2 := BoxF(LowerBoxCutOut2_Origin, LowerBoxCutOut2_FarPoint, [0; 0; 0]*deg)
LowerCircleCutOut2_Origin := [X_LowerTee2; Y_LowerTee2 + outerdiameter(ND)/2; Z_LowerTee2 - ShortTeeLength(ND)]
LowerCircleCutOut2 := CylinderF(LowerCircleCutOut2_Origin, R_CircleCutOut, L_CircleCutOut, [90; 0]*deg)
SubtractLowerBoxandCircle2 := SubtractF(["LowerTee2"], "DeleteMe")
DrawLowerTee2 := stack(LayerFiBranchManRecieverLowerTee2, CreateLowerTee2, FrzLayerFiBranchManRecieverLowerTee2, LowerBoxCutOut2, LowerCircleCutOut2, GroupDelete, SubtractLowerBoxandCircle2)
# Hose Clamps:
LayerHoseClamp2 := layer_new("HoseClamp2", green)
R_Clamp := (outerdiameter(ND)/2) + T_Pipe(ND, EN)
T_Clamp := 1/8*in
R_InsideClamp := R_Clamp - T_Clamp
L_Clamp := .25 in
HoseClamp2_Origin2 := [X_LowerTee2 - (TeeLength(ND)/2); Y_LowerTee2; Z_LowerTee2 - ShortTeeLength(ND) - T_Pipe(ND, EN)]
HoseClamp2_Origin1 := [X_LowerTee2 + (TeeLength(ND)/2); Y_LowerTee2; Z_LowerTee2 - ShortTeeLength(ND) - T_Pipe(ND, EN)]
HoseClamp2Outer1 := CylinderF(HoseClamp2_Origin1, R_Clamp, L_Clamp, [0; 0]*deg)
HoseClamp2Outer2 := CylinderF(HoseClamp2_Origin2, R_Clamp, L_Clamp, [0; 0]*deg)
FrzLayerHoseClamp2 := FreezeLayer("HoseClamp2")
HoseClamp2Inner1 := CylinderF(HoseClamp2_Origin1, R_InsideClamp, L_Clamp, [0; 0]*deg)
HoseClamp2Inner2 := CylinderF(HoseClamp2_Origin2, R_InsideClamp, L_Clamp, [0; 0]*deg)
SubtractInner2 := SubtractF(["HoseClamp2"], "DeleteMe")
DrawHoseClamps2 := stack(LayerHoseClamp2, HoseClamp2Outer1, HoseClamp2Outer2, FrzLayerHoseClamp2, HoseClamp2Inner1, HoseClamp2Inner2, GroupDelete, SubtractInner2)
DrawFiBranchManReceiver2 := stack(DrawUpperTee2, DrawMiddlePipe2, DrawLowerTee2, DrawHoseClamps2)
FiBranchManRecSpacerThaw := ThawMultiple(["TopTee1"; "MiddlePipe1"; "LowerTee1"; "HoseClamp1"; "TopTee2"; "MiddlePipe2"; "LowerTee2"; "HoseClamp2"])
FiBranchManRecSpacerFrz := FreezeMultiple(["TopTee1"; "MiddlePipe1"; "LowerTee1"; "HoseClamp1"; "TopTee2"; "MiddlePipe2"; "LowerTee2"; "HoseClamp2"])
ArrayFiBranchHolder := Array_All(2, 1, W_Fi - 2*ConRadius(ND_FiBwBranchHolder) - 2*S_FiManAssembly)
FiManBranchRecThaw := ThawMultiple(["FiManPipePlu"; "FiManCapPlu"])
FiManPipeFrz := FreezeLayer("FiManPipePlu")
FiManCapFrz := FreezeLayer("FiManCapPlu")
FiManBranchRecFrz := FreezeMultiple(["FiManPipePlu"; "FiManCapPlu"])
FiBranchHolderScript := stack(LayerFiManPipe, FiBranchHolder, FiManPipeFrz, LayerFiManCaps, FiBranchHolderCapRight, FiBranchHolderCapLeft, FiManCapFrz, DrawFiBranchManReceiver1, DrawFiBranchManReceiver2, FiManBranchRecThaw, FiBranchManRecSpacerThaw, ArrayFiBranchHolder, FiManBranchRecFrz, FiBranchManRecSpacerFrz)
# Manifold Trunks
SelectFiManPipes := SelectLayer("FiManPipePlu")
FiTrunk := PipeF([
    Fi_origin[0] - L_FiManFerncoCoupling/2;
    FiBwInletCoupling_origin[1];
    Fi_origin[2] + H_FiBottomLayer + outerradius(ND_FiBwManBranch)
], L_FiTrunk, [0; 0]*deg, ND_FiTrunk, PS_Default)
SelectFiManCaps := SelectLayer("FiManCapPlu")
FiTrunkCap := CapF([
    Fi_origin[0] - L_FiManFerncoCoupling/2 - L_FiTrunk;
    FiBwInletCoupling_origin[1];
    Fi_origin[2] + H_FiBottomLayer + outerradius(ND_FiBwManBranch)
], [180; 0]*deg, ND_FiTrunk)
FiTrunkScript := stack(SelectFiManPipes, FiTrunk, FiManPipeFrz, SelectFiManCaps, FiTrunkCap, FiManCapFrz)
# Trunk Line Spacer:
ND := 1 in
EN := PS_Default
LargePipeLayer := layer_new("LargePipe", blue)
B_RightandLeftPipe := 3 in
X_RightPipe := Fi_origin[0] - L_FiManFerncoCoupling/2
Y_RightPipe := FiBwInletCoupling_origin[1] - B_RightandLeftPipe/2
Z_RightPipe := Fi_origin[2] + outerdiameter(ND_FiTrunk) + outerradius(ND)
Y_LeftPipe := Y_RightPipe + B_RightandLeftPipe
RightPipe_Origin := [X_RightPipe; Y_RightPipe; Z_RightPipe]
LeftPipe_Origin := [X_RightPipe; Y_LeftPipe; Z_RightPipe]
L_LargePipe := 4 in
RightPipe := PipeF(RightPipe_Origin, L_LargePipe, [0; 0]*deg, ND, EN)
LeftPipe := PipeF(LeftPipe_Origin, L_LargePipe, [0; 0]*deg, ND, EN)
FrzLargePipeLayer := FreezeLayer("LargePipe")
X_Hole1 := X_RightPipe - 1 in
Y_Hole1 := Y_RightPipe - outerdiameter(ND)/2
Z_Hole1 := Z_RightPipe
L_Hole := 6 in
R_Hole := .265/2*in
X_Hole2 := X_Hole1 - 2 in
Hole1_Origin := [X_Hole1; Y_Hole1; Z_Hole1]
Hole2_Origin := [X_Hole2; Y_Hole1; Z_Hole1]
Hole1 := CylinderF(Hole1_Origin, R_Hole, L_Hole, [-90; 0]*deg)
Hole2 := CylinderF(Hole2_Origin, R_Hole, L_Hole, [-90; 0]*deg)
SubtractHole := SubtractF(["LargePipe"], "DeleteMe")
MakeThreadedRodLayer := layer_new("ThreadedRod", green)
Z_ThreadedRod1 := Z_Hole1
X_ThreadedRod1 := X_Hole1
Y_ThreadedRod1 := Y_Hole1 - outerdiameter(ND)/2
X_ThreadedRod2 := X_Hole2
L_ThreadedRod := 5.5 in
ThreadedRod2_Origin := [X_ThreadedRod2; Y_ThreadedRod1; Z_ThreadedRod1]
R_ThreadedRod := R_Hole
ThreadedRod1_Origin := [X_ThreadedRod1; Y_ThreadedRod1; Z_ThreadedRod1]
ThreadedRod1 := CylinderF(ThreadedRod1_Origin, R_ThreadedRod, L_ThreadedRod, [-90; 0]*deg)
ThreadedRod2 := CylinderF(ThreadedRod2_Origin, R_ThreadedRod, L_ThreadedRod, [-90; 0]*deg)
FrzThreadedRodLayer := FreezeLayer("ThreadedRod")
DrawLargePipe := stack(LargePipeLayer, RightPipe, LeftPipe, FrzLargePipeLayer, Hole1, Hole2, MakeThreadedRodLayer, ThreadedRod1, ThreadedRod2, FrzThreadedRodLayer, GroupDelete, SubtractHole)
# Nut:
NutLayer := layer_new("Nut", red)
L_OuterCylinder := .25 in
R_OuterCylinder := R_Hole + .25 in
OuterCylinder4_Origin := [X_ThreadedRod2; Y_Hole1 + outerdiameter(ND); Z_Hole1]
OuterCylinder1_Origin := [X_ThreadedRod1; Y_Hole1; Z_Hole1]
OuterCylinder2_Origin := [X_ThreadedRod2; Y_Hole1; Z_Hole1]
OuterCylinder3_Origin := [X_ThreadedRod1; Y_Hole1 + outerdiameter(ND); Z_Hole1]
OuterCylinder5_Origin := [X_ThreadedRod1; Y_Hole1 + B_RightandLeftPipe; Z_Hole1]
OuterCylinder6_Origin := [X_ThreadedRod2; Y_Hole1 + B_RightandLeftPipe; Z_Hole1]
OuterCylinder8_Origin := [X_ThreadedRod2; Y_Hole1 + outerdiameter(ND) + B_RightandLeftPipe; Z_Hole1]
OuterCylinder7_Origin := [X_ThreadedRod1; Y_Hole1 + outerdiameter(ND) + B_RightandLeftPipe; Z_Hole1]
OuterCylinder1 := CylinderF(OuterCylinder1_Origin, R_OuterCylinder, L_OuterCylinder, [90; 0]*deg)
OuterCylinder2 := CylinderF(OuterCylinder2_Origin, R_OuterCylinder, L_OuterCylinder, [90; 0]*deg)
OuterCylinder3 := CylinderF(OuterCylinder3_Origin, R_OuterCylinder, -L_OuterCylinder, [90; 0]*deg)
OuterCylinder4 := CylinderF(OuterCylinder4_Origin, R_OuterCylinder, -L_OuterCylinder, [90; 0]*deg)
OuterCylinder5 := CylinderF(OuterCylinder5_Origin, R_OuterCylinder, L_OuterCylinder, [90; 0]*deg)
OuterCylinder6 := CylinderF(OuterCylinder6_Origin, R_OuterCylinder, L_OuterCylinder, [90; 0]*deg)
OuterCylinder7 := CylinderF(OuterCylinder7_Origin, R_OuterCylinder, -L_OuterCylinder, [90; 0]*deg)
OuterCylinder8 := CylinderF(OuterCylinder8_Origin, R_OuterCylinder, -L_OuterCylinder, [90; 0]*deg)
FrzNutLayer := FreezeLayer("Nut")
L_InnerCylinder := .5 in
R_InnerCylinder := R_ThreadedRod
InnerCylinder3_Origin := [OuterCylinder3_Origin[0]; OuterCylinder3_Origin[1] + .25 in; OuterCylinder3_Origin[2]]
InnerCylinder4_Origin := [OuterCylinder4_Origin[0]; OuterCylinder4_Origin[1] + .25 in; OuterCylinder4_Origin[2]]
InnerCylinder1_Origin := [OuterCylinder1_Origin[0]; OuterCylinder1_Origin[1] + .25 in; OuterCylinder1_Origin[2]]
InnerCylinder2_Origin := [OuterCylinder2_Origin[0]; OuterCylinder2_Origin[1] + .25 in; OuterCylinder2_Origin[2]]
InnerCylinder7_Origin := [OuterCylinder7_Origin[0]; OuterCylinder7_Origin[1] + .25 in; OuterCylinder7_Origin[2]]
InnerCylinder6_Origin := [OuterCylinder6_Origin[0]; OuterCylinder6_Origin[1] + .25 in; OuterCylinder6_Origin[2]]
InnerCylinder8_Origin := [OuterCylinder8_Origin[0]; OuterCylinder8_Origin[1] + .25 in; OuterCylinder8_Origin[2]]
InnerCylinder5_Origin := [OuterCylinder5_Origin[0]; OuterCylinder5_Origin[1] + .25 in; OuterCylinder5_Origin[2]]
InnerCylinder1 := CylinderF(InnerCylinder1_Origin, R_InnerCylinder, L_InnerCylinder, [90; 0]*deg)
InnerCylinder2 := CylinderF(InnerCylinder2_Origin, R_InnerCylinder, L_InnerCylinder, [90; 0]*deg)
InnerCylinder3 := CylinderF(InnerCylinder3_Origin, R_InnerCylinder, L_InnerCylinder, [90; 0]*deg)
InnerCylinder4 := CylinderF(InnerCylinder4_Origin, R_InnerCylinder, L_InnerCylinder, [90; 0]*deg)
InnerCylinder5 := CylinderF(InnerCylinder5_Origin, R_InnerCylinder, L_InnerCylinder, [90; 0]*deg)
InnerCylinder6 := CylinderF(InnerCylinder6_Origin, R_InnerCylinder, L_InnerCylinder, [90; 0]*deg)
InnerCylinder7 := CylinderF(InnerCylinder7_Origin, R_InnerCylinder, L_InnerCylinder, [90; 0]*deg)
InnerCylinder8 := CylinderF(InnerCylinder8_Origin, R_InnerCylinder, L_InnerCylinder, [90; 0]*deg)
SubtractInner := SubtractF(["Nut"], "DeleteMe")
TrunkLineSpacerThaw := ThawMultiple(["LargePipe"; "ThreadedRod"; "Nut"])
TrunkLineSpacerFrz := FreezeMultiple(["LargePipe"; "ThreadedRod"; "Nut"])
DrawNut := stack(NutLayer, OuterCylinder1, OuterCylinder2, OuterCylinder3, OuterCylinder4, OuterCylinder5, OuterCylinder6, OuterCylinder7, OuterCylinder8, FrzNutLayer, InnerCylinder1, InnerCylinder2, InnerCylinder3, InnerCylinder4, InnerCylinder5, InnerCylinder6, InnerCylinder7, InnerCylinder8, GroupDelete, SubtractInner)
DrawSpacer := stack(DrawLargePipe, DrawNut)
# Trunk and Branch Receiver Holes and Array
FiTrunkOrifice := CylinderF([
    Fi_origin[0] - L_FiManFerncoCoupling - B_FiManifoldBranch/2;
    Fi_origin[1] + S_FiManAssembly + ConRadius(ND_FiBwBranchHolder);
    Fi_origin[2] + H_FiBottomLayer + outerradius(ND_FiBwManBranch)
], outerradius(ND_FiManBranch), W_Fi - 2*ConRadius(ND_FiBwBranchHolder) - 2*S_FiManAssembly, [-90; 0]*deg)
ArrayFiTrunkOrifice := ArrayLast(1, N_FiManBranch/2, -B_FiManifoldBranch)
SubtractFiManPipeOrifices := SubtractF(["FiManPipePlu"], "DeleteMe")
SubtractFiManCapOrifices := SubtractF(["FiManCapPlu"], "DeleteMe")
ArrayFiTrunks := array_all(N_FiLayer, 1, H_FiLayer + ShortTeeLength(ND))
ArrayFiTrunkSpacers := array_all(N_FiLayer, 1, H_FiLayer)
FiManTrunkOrificeScript := stack(FiTrunkOrifice, ArrayFiTrunkOrifice, GroupDelete, SubtractFiManPipeOrifices, FiTrunkOrifice, ArrayFiTrunkOrifice, GroupDelete, SubtractFiManCapOrifices, SelectFiManPipes, SelectFiManCaps, view("f"), ArrayFiTrunks, view("t"), FiManPipeFrz, FiManCapFrz)
FiManTrunkSpacerScript := stack(DrawSpacer, TrunkLineSpacerThaw, view("f"), ArrayFiTrunkSpacers, TrunkLineSpacerFrz)
# Backwash Trunk
FiBwTrunk := PipeF([
    Fi_origin[0] - L_FiManFerncoCoupling/2;
    FiBwInletCoupling_origin[1];
    Fi_origin[2] + outerradius(ND_FiBwManBranch)
], L_FiBwTrunk, [0; 0]*deg, ND_FiBwTrunk, PS_Default)
FiBwTrunkCap := CapF([
    Fi_origin[0] - L_FiManFerncoCoupling/2 - L_FiBwTrunk;
    FiBwInletCoupling_origin[1];
    Fi_origin[2] + outerradius(ND_FiBwManBranch)
], [180; 0; 0]*deg, ND_FiBwTrunk)
FiBwManTrunkScript := stack(SelectFiManPipes, FiBwTrunk, FiManPipeFrz, SelectFiManCaps, FiBwTrunkCap, FiManCapFrz)
# Backwash Branch Receivers
FiBwBranchReceiver := PipeF([
    Fi_origin[0] - CapThickness(ND_FiBwBranchHolder) - S_FiManAssembly;
    Fi_origin[1] + ConRadius(ND_FiBwBranchHolder) + S_FiManAssembly;
    Fi_origin[2] + outerradius(ND_FiBwManBranch)
], L_Fi - 2*CapThickness(ND_FiBranchHolder) - 2*S_FiManAssembly, [0; 0]*deg, ND_FiBwBranchHolder, PS_Default)
FiBwBranchReceiverCapR := CapF([
    Fi_origin[0] - CapThickness(ND_FiBwBranchHolder) - S_FiManAssembly;
    Fi_origin[1] + ConRadius(ND_FiBwBranchHolder) + S_FiManAssembly;
    Fi_origin[2] + outerradius(ND_FiBwManBranch)
], [0; 0; 0]*deg, ND_FiBwBranchHolder)
FiBwBranchReceiverCapL := CapF([
    Fi_origin[0] - L_Fi + S_FiManAssembly + CapThickness(ND_FiBwBranchHolder);
    Fi_origin[1] + ConRadius(ND_FiBwBranchHolder) + S_FiManAssembly;
    Fi_origin[2] + outerradius(ND_FiBwManBranch)
], [180; 0; 0]*deg, ND_FiBwBranchHolder)
ArrayFiBwBranchHolder := ArrayLast(2, 1, W_Fi - 2*ConRadius(ND_FiBwBranchHolder) - 2*S_FiManAssembly)  # ARRAY
FiBwBranchReceiverScript := stack(SelectFiManPipes, FiBwBranchReceiver, ArrayFiBwBranchHolder, FiManPipeFrz, SelectFiManCaps, FiBwBranchReceiverCapR, ArrayFiBwBranchHolder, FiBwBranchReceiverCapL, ArrayFiBwBranchHolder, FiManCapFrz)
# Backwash Trunk and Branch Receiver Orifices
FiBwTrunkOrifice := CylinderF([
    Fi_origin[0] - L_FiManFerncoCoupling - B_FiManifoldBranch/2;
    Fi_origin[1] + ConRadius(ND_FiBwBranchHolder) + S_FiManAssembly;
    Fi_origin[2] + outerradius(ND_FiBwManBranch)
], outerradius(ND_FiBwManBranch), W_Fi - 2*ConRadius(ND_FiBwBranchHolder) - 2*S_FiManAssembly, [-90; 0]*deg)
FiBwTrunkOrificeScript := stack(FiBwTrunkOrifice, ArrayFiTrunkOrifice, GroupDelete, SubtractFiManPipeOrifices, FiBwTrunkOrifice, ArrayFiTrunkOrifice, GroupDelete, SubtractFiManCapOrifices)
# Filter Box Floor Cutouts
FiBwTrunkCutout := BoxF([
    Fi_origin[0];
    Fi_origin[1] + W_Fi/2 - ConRadius(ND_FiBwTrunk);
    Fi_origin[2] - max(ConRadius(ND_FiBwTrunk), FerncoOuterDiameter(ND_FiBwTrunk)/2) + outerradius(ND_FiBwManBranch)
], [Fi_origin[0] - L_Fi; Fi_origin[1] + W_Fi/2 + ConRadius(ND_FiBwTrunk); Fi_origin[2]], [0; 0; 0]*deg)
FiBwBranchHolderCutout1 := BoxF([
    Fi_origin[0];
    Fi_origin[1];
    Fi_origin[2] - ConRadius(ND_FiBwBranchHolder) + outerradius(ND_FiBwManBranch)
], [
    Fi_origin[0] - L_Fi;
    Fi_origin[1] + S_FiManAssembly + 2*ConRadius(ND_FiBwBranchHolder);
    Fi_origin[2]
], [0; 0; 0]*deg)
FiBwBranchHolderCutout2 := BoxF([
    Fi_origin[0];
    Fi_origin[1] + W_Fi;
    Fi_origin[2] - ConRadius(ND_FiBwBranchHolder) + outerradius(ND_FiBwManBranch)
], [
    Fi_origin[0] - L_Fi;
    Fi_origin[1] + W_Fi - 2*ConRadius(ND_FiBwBranchHolder) - S_FiManAssembly;
    Fi_origin[2]
], [0; 0; 0]*deg)
SubtractBwTrunkCutouts := SubtractF(["FiTankCon"], "DeleteMe")
FiBoxFloorCutoutScript := stack(FiBwTrunkCutout, FiBwBranchHolderCutout1, FiBwBranchHolderCutout2, GroupDelete, SubtractBwTrunkCutouts)
FiTrunkReceiverScript := stack(FiBranchHolderScript, FiTrunkScript, FiManTrunkSpacerScript, FiManTrunkOrificeScript, FiBwManTrunkScript, FiBwBranchReceiverScript, FiBwTrunkOrificeScript, FiBoxFloorCutoutScript)
# Manifold Branches
LayerMan := layer_new("FiManBranchPlu", blue3)
FiManBranch := PipeF(Fi_origin + [
    -L_FiManFerncoCoupling - B_FiManifoldBranch/2;
    S_FiManAssembly + ConRadius(ND_FiBwBranchHolder) + outerradius(ND_FiBranchHolder) - L_FiManBranchExt;
    outerradius(ND_FiBwManBranch) + H_FiBottomLayer
], L_FiManBranch, [-90; 0]*deg, ND_FiManBranch, PS_FiBranch)
FreezeFiManLayer := FreezeLayer("FiManBranchPlu")
FiManBranchSlot := BoxF(Fi_origin + [
    -L_FiManFerncoCoupling - B_FiManifoldBranch/2 - outerradius(ND_FiManBranch);
    S_FiManAssembly + ConRadius(ND_FiBwBranchHolder) + outerradius(ND_FiBranchHolder) + B_FiManSlot/2;
    outerradius(ND_FiBwManBranch) + H_FiBottomLayer + H_FiManCenterToSlot
], Fi_origin + [
    -L_FiManFerncoCoupling - B_FiManifoldBranch/2 + outerradius(ND_FiManBranch);
    S_FiManAssembly + ConRadius(ND_FiBwBranchHolder) + outerradius(ND_FiBranchHolder) + B_FiManSlot/2 + W_FiManSlots;
    outerradius(ND_FiBwManBranch) + H_FiBottomLayer + outerradius(ND_FiManBranch)
], [0; 0; 0]*deg)
MirrorFiManBranchSlot := MirrorLast([Fi_origin[1] + 0 m; Fi_origin[2] + outerradius(ND_FiBwManBranch) + H_FiBottomLayer], [Fi_origin[1] + zc; Fi_origin[2] + outerradius(ND_FiBwManBranch) + H_FiBottomLayer], "N")
ArrayFiManBranchSlot := array_all(N_FiManSlotsPerRow, 1, B_FiManSlot)  # ARRAY
SubtractFiManSlots := SubtractF(["FiManBranchPlu"], "DeleteMe")
SelectFiManBranch := SelectLayer("FiManBranchPlu")
FiBranchManRecSpacerThaw := ThawMultiple(["TopTee1"; "MiddlePipe1"; "LowerTee1"; "HoseClamp1"; "TopTee2"; "MiddlePipe2"; "LowerTee2"; "HoseClamp2"])
FiBranchManRecSpacerFrz := FreezeMultiple(["TopTee1"; "MiddlePipe1"; "LowerTee1"; "HoseClamp1"; "TopTee2"; "MiddlePipe2"; "LowerTee2"; "HoseClamp2"])
ArrayFiMan := array_all(N_FiLayer, 1, H_FiLayer)  # ARRAY
# Do not stack unless you are drawing only the slotted pipes. The slots make the 3D model unmanagable.
FiBranchScriptSlots := stack(LayerMan, FiManBranch, FreezeFiManLayer, FiManBranchSlot, view("r"), MirrorFiManBranchSlot, view("t"), ArrayFiManBranchSlot, GroupDelete, SubtractFiManSlots, SelectFiManBranch, BrepAll, view("f"), ArrayFiMan, view("t"))
FiBranchScript := stack(LayerMan, FiManBranch, FiBranchManRecSpacerThaw, view("f"), ArrayFiMan, view("t"), FiBranchManRecSpacerFrz)
BwManBranch := PipeF(Fi_origin + [
    -L_FiManFerncoCoupling - B_FiManifoldBranch/2;
    S_FiManAssembly + ConRadius(ND_FiBwBranchHolder) + outerradius(ND_FiBwBranchHolder) - L_FiManBranchExt;
    outerradius(ND_FiBwManBranch)
], L_FiBwManBranch, [-90; 0]*deg, ND_FiBwManBranch, PS_FiBranch)
FiBwManBranchSlot := BoxF(Fi_origin + [
    -L_FiManFerncoCoupling - B_FiManifoldBranch/2 - outerradius(ND_FiBwManBranch);
    S_FiManAssembly + ConRadius(ND_FiBwBranchHolder) + outerradius(ND_FiBwBranchHolder) + B_FiBwManSlot/2;
    outerradius(ND_FiBwManBranch) + H_FiBwManCenterToSlot
], Fi_origin + [
    -L_FiManFerncoCoupling - B_FiManifoldBranch/2 + outerradius(ND_FiBwManBranch);
    S_FiManAssembly + ConRadius(ND_FiBwBranchHolder) + outerradius(ND_FiBwBranchHolder) + B_FiBwManSlot/2 + W_FiManSlots;
    outerdiameter(ND_FiBwManBranch)
], [0; 0; 0]*deg)
ArrayFiBwManBranchSlot := ArrayLast(N_FiBwManSlotsPerRow, 1, B_FiBwManSlot)
MirrorFiManBranches := Mirror3dAll("zx", [Fi_origin[0]; Fi_origin[1] + W_Fi/2], "n")
ARRAY
ArrayManBranches := array_all(1, N_FiManBranch/2, -B_FiManifoldBranch)
# Do not stack unless you are drawing only the slotted pipes. The slots make the 3D model unmanagable.
FiBwBranchScriptSlots := stack(BwManBranch, FreezeFiManLayer, FiBwManBranchSlot, ArrayFiBwManBranchSlot, GroupDelete, SubtractFiManSlots, SelectFiManBranch, BrepAll, ArrayManBranches, MirrorFiManBranches, FreezeFiManLayer)
FiBwBranchScript := stack(BwManBranch, ArrayManBranches, MirrorFiManBranches, FreezeFiManLayer)
FiManBranchScript := stack(FiBranchScript, FiBwBranchScript)
FiManifoldScript := stack(FiManWallScript, FiTrunkReceiverScript, FiManBranchScript)
# Auxiliary Box Concrete
# Entrance and Exit Boxes
LayerFiAuxBox := layer_new("FiCon", grey)
FiEntBox := Tank(FiEntranceBox_origin, FiEntranceBox_dim, T_PlantWall)
FiExitBox := Tank(FiExitBox_origin, FiExitBox_dim, T_PlantWall)
# Overflow and Distribution Boxes
FiDistBox_Dim = [0.45; 0.319382; 1.11118] m
FiDistBox := Tank(FiDistBox_Origin, FiDistBox_Dim, T_PlantWall)
FiOverflowBox := Tank(FiOverflowBox_Origin, FiOverflowBox_Dim, T_PlantWall)
FiOverflowBoxBase := BoxF(FiOverflowBox_Origin + [T_PlantWall; -T_PlantWall; -T_PlantWall], [
    FiOverflowBox_Origin[0] - FiOverflowBox_Dim[0];
    FiOverflowBox_Origin[1] + FiOverflowBox_Dim[1] + T_PlantWall;
    FiEntranceBox_origin[2] - T_PlantWall
], [0; 0; 0]*deg)
LayerFiAuxBoxFrz := FreezeLayer("FiCon")
# Entrance Box Air Removal
FiAirRemovalBlockSlot := BoxF([
    FiEntranceBox_origin[0] - S_FiEntranceBaffle - T_SedWeir - S_FiBaffleToBlock;
    FiEntranceBox_origin[1] - T_ConcreteMin;
    Z_FiAirRemovalBlockBottom
], [
    FiEntranceBox_origin[0] - S_FiEntranceBaffle - T_SedWeir - S_FiBaffleToBlock;
    FiEntranceBox_origin[1] + T_ConcreteMin;
    Z_FiEntranceBottom + H_FiEntrance
] + [-W_FiAirRemovalBlock; W_FiEntrance; 0], [0; 0; 0])
FiBaffle := BoxF([FiEntranceBox_origin[0]; FiEntranceBox_origin[1] - T_ConcreteMin; Z_FiEntranceBottom] + [-S_FiEntranceBaffle; 0; S_FiEntranceBaffle], [FiEntranceBox_origin[0]; FiEntranceBox_origin[1]; Z_FiEntranceBottom] + [-S_FiEntranceBaffle - T_SedWeir; W_FiEntrance + T_ConcreteMin; H_FiEntrance], [0; 0; 0])
FiSubtractBaffleEntSlots := SubtractF(["FiCon"], "DeleteMe")
FiSubtractBaffleOverflowSlots := SubtractF(["FiCon"], "DeleteMe")
ArrayFiBaffleSlots := array_all(2, 1, -(W_FiEntrance + W_FiOverflow + 2*T_PlantWall))
FiBaffleSlots :=
    stack(FiAirRemovalBlockSlot, FiBaffle, GroupDelete, FiSubtractBaffleEntSlots, FiAirRemovalBlockSlot, FiBaffle, GroupDelete, FiSubtractBaffleOverflowSlots) if N_Fi == 1
    stack(FiAirRemovalBlockSlot, FiBaffle, GroupDelete, FiSubtractBaffleEntSlots, FiAirRemovalBlockSlot, FiBaffle, ArrayFiBaffleSlots, GroupDelete, FiSubtractBaffleOverflowSlots) otherwise
FiBaffleLayer := layer_new("FiBaffles", ltgrey)
FiAirRemovalBlock := BoxF([
    FiEntranceBox_origin[0] - S_FiEntranceBaffle - T_SedWeir - S_FiBaffleToBlock;
    FiEntranceBox_origin[1] - T_ConcreteMin;
    Z_FiAirRemovalBlockBottom
], [
    FiEntranceBox_origin[0] - S_FiEntranceBaffle - 2*T_SedWeir - S_FiBaffleToBlock;
    FiEntranceBox_origin[1] + T_ConcreteMin + W_FiEntrance;
    Z_FiAirRemovalBlockTop
], [0; 0; 0])
FiBaffleLayerFrz := FreezeLayer("FiBaffles")
FiBaffles := stack(FiBaffleLayer, FiBaffle, FiAirRemovalBlock, FiBaffleLayerFrz)
FiAuxBoxScript := stack(LayerFiAuxBox, FiEntBox, FiExitBox, Union_All, FiDistBox, FiOverflowBox, FiOverflowBoxBase, LayerFiAuxBoxFrz, FiBaffleSlots, FiBaffles)
# Auxiliary Box Plumbing (not filter entrance or exit)
Z_FiOverflowVertDrainPipeStart := Z_FiOverflowBottom - CouplingLength(ND_FiEntOverflow) + SocketDepth(ND_FiEntOverflow) = 1.43376 m
Z_FiOverflowVertDrainPipeEnd := Z_FiOverflowBottom - H_FiEntOverflowDrop + ElbowRadius(ND_FiEntOverflow) = 1.14923 m
X_FiOverflowHorizDrainPipeStart := FiInletChannel_Origin[0] + T_PlantWall - CouplingLength(ND_FiEntOverflow) + SocketDepth(ND_FiEntOverflow)
X_FiOverflowHorizDrainPipeEnd := FiEntranceBox_origin[0] - L_FiEntrance/2 + ElbowRadius(ND_FiEntOverflow)
# Auxiliary Fittings
FiAuxFittingLayer := layer_new("FiAuxFittingPlu", green)
FiAuxRemovableLayer := layer_new("FiAuxRemovablePlu", red)
SelectFiAuxRemovables := SelectLayer("FiAuxRemovablePlu")
FiBypassCoupling := CouplingSUBF([
    FiExitBox_origin[0] + CouplingLength(ND_FiBypass) - SocketDepth(ND_FiBypass);
    FiEntranceBox_origin[1] - T_ChannelWall - W_FiOverflow/2;
    Z_FiTop - S_Fitting - ConRadius(ND_FiBypass)
], [0; 0]*deg, ND_FiBypass, PS_Default, ["FiCon"])
FiBypassCap := CapF([
    FiExitBox_origin[0] + CouplingLength(ND_FiBypass) + CapHeight(ND_FiBypass) - CapThickness(ND_FiBypass);
    FiEntranceBox_origin[1] - T_ChannelWall - W_FiOverflow/2;
    Z_FiTop - S_Fitting - ConRadius(ND_FiBypass)
], [0; 0; 0]*deg, ND_FiBypass)
FiOverflowBoxCoupling := CouplingSUBF([
    FiEntranceBox_origin[0] - L_FiEntrance/2;
    FiEntranceBox_origin[1] - T_ChannelWall - W_FiOverflow/2;
    Z_FiOverflowVertDrainPipeStart
], [0; 90]*deg, ND_FiEntOverflow, PS_Default, ["FiCon"])
FiAuxFittingFrz := FreezeLayer("FiAuxFittingPlu")
FiAuxRemovableFrz := FreezeLayer("FiAuxRemovablePlu")
FiAuxFittingScript := stack(FiAuxFittingLayer, FiBypassCoupling, FiOverflowBoxCoupling, FiAuxFittingFrz, FiAuxRemovableLayer, FiBypassCap, FiAuxRemovableFrz)
# Distribution Plumbing Start
FiDistFittingLayer := layer_new("FiDistFittingPlu", green)
FiDistCoupling := CouplingSUBF([
    FiExitBox_origin[0] - L_FiExit/2;
    FiEntranceBox_origin[1] - T_ChannelWall - W_FiOverflow/2;
    Z_FiExitBottom - SocketDepth(ND_DistPipe)
], [0; 270]*deg, ND_DistPipe, PS_Default, ["FiCon"])
FiDistElbow1 := ElbowF([
    FiExitBox_origin[0] - L_FiExit/2;
    FiEntranceBox_origin[1] - T_ChannelWall - W_FiOverflow/2;
    Z_FiDistPipe + ElbowRadius(ND_DistPipe)
], [0; 0; 270]*deg, ND_DistPipe, PS_Default)
FiDistFittingFrz := FreezeLayer("FiDistFittingPlu")
FiDistPipeLayer := layer_new("FiDistPipePlu", blue)
L_FiDistPipe1 := Z_FiExitBottom - CouplingLength(ND_DistPipe) + SocketDepth(ND_DistPipe) - (Z_FiDistPipe + ElbowRadius(ND_DistPipe))
FiDistPipe1 := PipeSUBF([
    FiExitBox_origin[0] - L_FiExit/2;
    FiEntranceBox_origin[1] - T_ChannelWall - W_FiOverflow/2;
    Z_FiExitBottom - CouplingLength(ND_DistPipe) + SocketDepth(ND_DistPipe)
], L_FiDistPipe1, [0; 270; 0]*deg, ND_DistPipe, PS_Default, ["FiCon"])
FiDistPipeFrz := FreezeLayer("FiDistPipePlu")
FiDistStartScript := stack(FiDistFittingLayer, FiDistCoupling, FiDistElbow1, FiDistFittingFrz, FiDistPipeLayer, FiDistPipe1, FiDistPipeFrz)
# Auxiliary Pipes
FiAuxPipeLayer := layer_new("FiAuxPipePlu", blue)
FiBypassPipe1Horiz := PipeF([
    FiExitBox_origin[0] + CouplingLength(ND_FiBypass) + CapHeight(ND_FiBypass) - CapThickness(ND_FiBypass);
    FiEntranceBox_origin[1] - T_ChannelWall - W_FiOverflow/2;
    Z_FiTop - S_Fitting - ConRadius(ND_FiBypass)
], CapHeight(ND_FiBypass) - CapThickness(ND_FiBypass) + SocketDepth(ND_FiBypass), [0; 0; 0]*deg, ND_FiBypass, PS_Default)
FiOverflowDrainPipeVert := PipeSUBF([
    FiEntranceBox_origin[0] - L_FiEntrance/2;
    FiEntranceBox_origin[1] - T_ChannelWall - W_FiOverflow/2;
    Z_FiOverflowVertDrainPipeStart
], Z_FiOverflowVertDrainPipeStart - Z_FiOverflowVertDrainPipeEnd, [0; 270]*deg, ND_FiEntOverflow, PS_Default, ["FiCon"])
LayerFiAuxPipeFrz := FreezeLayer("FiAuxPipePlu")
FiAuxPipeScript := stack(FiAuxPipeLayer, FiOverflowDrainPipeVert, LayerFiAuxPipeFrz, SelectFiAuxRemovables, FiBypassPipe1Horiz, FiAuxRemovableFrz)
FiAuxPlumbingScript := stack(FiAuxFittingScript, FiDistStartScript, FiAuxPipeScript)
# Entrance and Exit Plumbing Until Filter Wall Coupling
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# This is all of the piping between filter box, entrance and exit
# In means the pipe goes IN TO THE FILTER
# Out means it comes OUT OF THE FILTER
SelectFiPipeLayer := SelectLayer("FiPipePlu")
SelectFiFittingLayer := SelectLayer("FiFittingsPlu")
# Inlet 0 Pipes (backwash)
Z_FiInPipe0aStart := FiEntranceBox_origin[2] - CouplingLength(ND_FiBwTrunk) + SocketDepth(ND_FiBwTrunk)
Z_FiInPipe0aEnd := Fi_origin[2] + outerradius(ND_FiBwManBranch) + ShortTeeLength(ND_FiBwTrunk)
L_FiInPipe0a := FiBwInletCoupling_origin[2] - Z_FiInPipe0aEnd = 2.95613 m
FiInPipe0a := PipeSUBF(FiBwInletCoupling_origin, L_FiInPipe0a, [0; 270]*deg, ND_FiBwTrunk, PS_Default, ["FiCon"])
X_FiBwTrunkPipeEnd := Fi_origin[0] + T_FiWall + CouplingLength(ND_FiBwTrunk) - SocketDepth(ND_FiBwTrunk)
L_FiInPipe0b := FiBwInletCoupling_origin[0] - TeeLength(ND_FiBwTrunk)/2 - X_FiBwTrunkPipeEnd = 1.76953 m
FiInPipe0b := PipeF([
    FiBwInletCoupling_origin[0] - ShortTeeLength(ND_FiBwTrunk);
    FiBwInletCoupling_origin[1];
    Z_FiInPipe0aEnd - ShortTeeLength(ND_FiBwTrunk)
], L_FiInPipe0b, [0; 0]*deg, ND_FiBwTrunk, PS_Default)
FiIn0PipeScript := stack(FiInPipe0a, FiInPipe0b)
# Inlet 0 Fittings (backwash)
FiEntBoxCoupling0 := CouplingSUBF(FiBwInletCoupling_origin, [0; 90]*deg, ND_FiBwTrunk, PS_Default, ["FiCon"])
FiInTee0a := TeeF([FiBwInletCoupling_origin[0]; FiBwInletCoupling_origin[1]; Z_FiInPipe0aEnd], [0; 0; 90]*deg, ND_FiBwTrunk, PS_Default)
FiInReducerLarge := CylinderF([
    FiBwInletCoupling_origin[0] + ShortTeeLength(ND_FiBwTrunk) + 10 cm;
    FiBwInletCoupling_origin[1];
    Z_FiInPipe0aEnd - ShortTeeLength(ND_FiBwTrunk)
], innerdiameter(ND_FiBwTrunk, PS_Default)/2, 10 cm, [0; 0]*deg)
FiInReducerSmall := CylinderF([
    FiBwInletCoupling_origin[0] + ShortTeeLength(ND_FiBwTrunk) + 2*10*cm;
    FiBwInletCoupling_origin[1];
    Z_FiInPipe0aEnd - ShortTeeLength(ND_FiBwTrunk)
], innerdiameter(3 in, PS_Default)/2, 10 cm, [0; 0]*deg)
FiValveLayer := layer_new("FiValvePlu", blue3)
# The valve length and socket functions are not returning the correct numbers, so for now, I am arbitrarily setting the valve over by 60% of its length as returned by the function
FiInValve := insertdwg("https://confluence.cornell.edu/download/attachments/173604905/Fi-Scaled-Gate-Valve-Threaded.dwg", [
    FiBwInletCoupling_origin[0] + ShortTeeLength(ND_FiBwTrunk) + 2*10*cm + 0.6*ValveLength(3 in);
    FiBwInletCoupling_origin[1];
    Z_FiInPipe0aEnd - ShortTeeLength(ND_FiBwTrunk)
], 3 in/(1.16 m), 3 in/(1.16 m), 0 deg)
LayerFiValveFrz := FreezeLayer("FiValvePlu")
FiIn0FittingScript := stack(FiEntBoxCoupling0, FiInTee0a, FiInReducerLarge, FiInReducerSmall, LayerFiFittingFrz, FiValveLayer, FiInValve, LayerFiValveFrz, SelectFiFittingLayer)
# Inlet 1 Pipes
Z_FiInPipe1aEnd := Fi_origin[2] + outerradius(ND_FiBwManBranch) + H_FiBottomLayer + H_FiLayer + ElbowRadius(ND_FiTrunk)
L_FiInPipe1a := FiInletCoupling1_origin[2] - Z_FiInPipe1aEnd
FiInPipe1a := PipeSUBF(FiInletCoupling1_origin, L_FiInPipe1a, [0; 270]*deg, ND_FiTrunk, PS_Default, ["FiCon"])
X_FiTrunkPipeEnd := Fi_origin[0] + T_FiWall + CouplingLength(ND_FiTrunk) - SocketDepth(ND_FiTrunk)
L_FiInPipe1b := FiInletCoupling1_origin[0] - ElbowRadius(ND_FiTrunk) - X_FiTrunkPipeEnd
FiInPipe1b := PipeF([
    FiInletCoupling1_origin[0] - ElbowRadius(ND_FiTrunk);
    FiBwInletCoupling_origin[1];
    Z_FiInPipe1aEnd - ElbowRadius(ND_FiTrunk)
], L_FiInPipe1b, [0; 0]*deg, ND_FiTrunk, PS_Default)
FiIn1PipeScript := stack(FiInPipe1a, FiInPipe1b)
# Inlet 1 Fittings
FiEntBoxCoupling1 := CouplingSUBF(FiInletCoupling1_origin, [0; 90]*deg, ND_FiTrunk, PS_Default, ["FiCon"])
FiInElbow1a := ElbowF([FiInletCoupling1_origin[0]; FiInletCoupling1_origin[1]; Z_FiInPipe1aEnd], [0; 0; -90]*deg, ND_FiTrunk, PS_Default)
FiIn1FittingScript := stack(FiEntBoxCoupling1, FiInElbow1a)
# Inlet 2 Pipes
Z_FiInPipe2aEnd := Z_FiInPipe1aEnd + 2*H_FiLayer
X_FiInPipe2bEnd := FiExitCoupling1_origin[0] - ConRadius(ND_FiTrunk) - T_ConcreteMin  # Gives 5 cm of clearance plus the elbow radius
L_FiInPipe2a := FiInletCoupling2_origin[2] - Z_FiInPipe2aEnd
L_FiInPipe2b := FiInletCoupling2_origin[0] - ElbowRadius(ND_FiTrunk) - X_FiInPipe2bEnd
FiInPipe2a := PipeSUBF(FiInletCoupling2_origin, L_FiInPipe2a, [0; 270]*deg, ND_FiTrunk, PS_Default, ["FiCon"])
FiInPipe2b := PipeF([
    FiInletCoupling2_origin[0] - ElbowRadius(ND_FiTrunk);
    FiInletCoupling2_origin[1];
    Z_FiInPipe2aEnd - ElbowRadius(ND_FiTrunk)
], L_FiInPipe2b, [0; 0]*deg, ND_FiTrunk, PS_Default)
Y_FiInPipe2cEnd := Fi_origin[1] + W_Fi/2 - ElbowRadius(ND_FiTrunk)
L_FiInPipe2c := Y_FiInPipe2cEnd - (FiInletCoupling2_origin[1] + ElbowRadius(ND_FiTrunk))
L_FiInPipe2d := X_FiInPipe2bEnd - 2*ElbowRadius(ND_FiTrunk) - X_FiTrunkPipeEnd
FiInPipe2c := PipeF([
    X_FiInPipe2bEnd - ElbowRadius(ND_FiTrunk);
    FiInletCoupling2_origin[1] + ElbowRadius(ND_FiTrunk);
    Z_FiInPipe2aEnd - ElbowRadius(ND_FiTrunk)
], L_FiInPipe2c, [-90; 0]*deg, ND_FiTrunk, PS_Default)
FiInPipe2d := PipeF([
    X_FiInPipe2bEnd - 2*ElbowRadius(ND_FiTrunk);
    Y_FiInPipe2cEnd + ElbowRadius(ND_FiTrunk);
    Z_FiInPipe2aEnd - ElbowRadius(ND_FiTrunk)
], L_FiInPipe2d, [0; 0]*deg, ND_FiTrunk, PS_Default)
FiIn2PipeScript := stack(FiInPipe2a, FiInPipe2b, FiInPipe2c, FiInPipe2d)
# Inlet 2 Fittings
FiEntBoxCoupling2 := CouplingSUBF(FiInletCoupling2_origin, [0; 90]*deg, ND_FiTrunk, PS_Default, ["FiCon"])
FiInElbow2a := ElbowF([FiInletCoupling2_origin[0]; FiInletCoupling2_origin[1]; Z_FiInPipe2aEnd], [0; 0; -90]*deg, ND_FiTrunk, PS_Default)
FiInElbow2b := ElbowF([X_FiInPipe2bEnd; FiInletCoupling2_origin[1]; Z_FiInPipe2aEnd - ElbowRadius(ND_FiTrunk)], [-90; 180; 0]*deg, ND_FiTrunk, PS_Default)
FiInElbow2c := ElbowF([
    X_FiInPipe2bEnd - ElbowRadius(ND_FiTrunk);
    Y_FiInPipe2cEnd;
    Z_FiInPipe2aEnd - ElbowRadius(ND_FiTrunk)
], [0; 0; 0]*deg, ND_FiTrunk, PS_Default)
FiIn2FittingScript := stack(FiEntBoxCoupling2, FiInElbow2a, FiInElbow2b, FiInElbow2c)
# Inlet 3 Pipes
Z_FiInPipe3aEnd := Z_FiInPipe2aEnd + 2*H_FiLayer
L_FiInPipe3a := FiInletCoupling3_origin[2] - Z_FiInPipe3aEnd
FiInPipe3a := PipeSUBF(FiInletCoupling3_origin, FiInletCoupling3_origin[2] - Z_FiInPipe3aEnd, [0; 270]*deg, ND_FiTrunk, PS_Default, ["FiCon"])
X_FiInPipe3bEnd := X_FiInPipe2bEnd
L_FiInPipe3b := FiInletCoupling3_origin[0] - ElbowRadius(ND_FiTrunk) - X_FiInPipe3bEnd
FiInPipe3b := PipeF([
    FiInletCoupling3_origin[0] - ElbowRadius(ND_FiTrunk);
    FiInletCoupling3_origin[1];
    Z_FiInPipe3aEnd - ElbowRadius(ND_FiTrunk)
], L_FiInPipe3b, [0; 0]*deg, ND_FiTrunk, PS_Default)
Y_FiInPipe3cEnd := Y_FiInPipe2cEnd
L_FiInPipe3c := Y_FiInPipe3cEnd - (FiInletCoupling3_origin[1] + ElbowRadius(ND_FiTrunk))
L_FiInPipe3d := X_FiInPipe3bEnd - 2*ElbowRadius(ND_FiTrunk) - X_FiTrunkPipeEnd
FiInPipe3c := PipeF([
    X_FiInPipe3bEnd - ElbowRadius(ND_FiTrunk);
    FiInletCoupling3_origin[1] + ElbowRadius(ND_FiTrunk);
    Z_FiInPipe3aEnd - ElbowRadius(ND_FiTrunk)
], L_FiInPipe3c, [-90; 0]*deg, ND_FiTrunk, PS_Default)
FiInPipe3d := PipeF([
    X_FiInPipe3bEnd - 2*ElbowRadius(ND_FiTrunk);
    Y_FiInPipe3cEnd + ElbowRadius(ND_FiTrunk);
    Z_FiInPipe3aEnd - ElbowRadius(ND_FiTrunk)
], L_FiInPipe3d, [0; 0]*deg, ND_FiTrunk, PS_Default)
FiIn3PipeScript := stack(FiInPipe3a, FiInPipe3b, FiInPipe3c, FiInPipe3d)
# Inlet 3 Fittings
FiEntBoxCoupling3 := CouplingSUBF(FiInletCoupling3_origin, [0; 90]*deg, ND_FiTrunk, PS_Default, ["FiCon"])
FiInElbow3a := ElbowF([FiInletCoupling3_origin[0]; FiInletCoupling3_origin[1]; Z_FiInPipe3aEnd], [0; 0; -90]*deg, ND_FiTrunk, PS_Default)
FiInElbow3b := ElbowF([X_FiInPipe3bEnd; FiInletCoupling3_origin[1]; Z_FiInPipe3aEnd - ElbowRadius(ND_FiTrunk)], [-90; 180; 0]*deg, ND_FiTrunk, PS_Default)
FiInElbow3c := ElbowF([
    X_FiInPipe3bEnd - ElbowRadius(ND_FiTrunk);
    Y_FiInPipe3cEnd;
    Z_FiInPipe3aEnd - ElbowRadius(ND_FiTrunk)
], [0; 0; 0]*deg, ND_FiTrunk, PS_Default)
FiIn3FittingScript := stack(FiEntBoxCoupling3, FiInElbow3a, FiInElbow3b, FiInElbow3c)
# Outlet 0 Pipes
Z_FiOutPipe0aEnd := Z_FiInPipe1aEnd + H_FiLayer
L_FiOutPipe0a := FiExitCoupling0_origin[2] - Z_FiOutPipe0aEnd
L_FiOutPipe0b := FiExitCoupling0_origin[0] - ElbowRadius(ND_FiTrunk) - X_FiTrunkPipeEnd
FiOutPipe0a := PipeSUBF(FiExitCoupling0_origin, FiExitCoupling0_origin[2] - Z_FiOutPipe0aEnd, [0; -90]*deg, ND_FiTrunk, PS_Default, ["FiCon"])
FiOutPipe0b := PipeF([
    FiExitCoupling0_origin[0] - ElbowRadius(ND_FiTrunk);
    FiExitCoupling0_origin[1];
    Z_FiOutPipe0aEnd - ElbowRadius(ND_FiTrunk)
], L_FiOutPipe0b, [0; 0]*deg, ND_FiTrunk, PS_Default)
FiOut0PipeScript := stack(FiOutPipe0a, FiOutPipe0b)
# Outlet 0 Fittings
FiExChanCoupling0 := CouplingSUBF(FiExitCoupling0_origin, [0; 90]*deg, ND_FiTrunk, PS_Default, ["FiCon"])
FiOutElbow0a := ElbowF([FiExitCoupling0_origin[0]; FiExitCoupling0_origin[1]; Z_FiOutPipe0aEnd], [0; 0; -90]*deg, ND_FiTrunk, PS_Default)
FiOut0FittingScript := stack(FiExChanCoupling0, FiOutElbow0a)
# Outlet 1 Pipes
Z_FiOutPipe1aEnd := Z_FiOutPipe0aEnd + 2*H_FiLayer
L_FiOutPipe1a := FiExitCoupling1_origin[2] - Z_FiOutPipe1aEnd
L_FiOutPipe1b := FiExitCoupling1_origin[0] - ElbowRadius(ND_FiTrunk) - X_FiTrunkPipeEnd
FiOutPipe1a := PipeSUBF(FiExitCoupling1_origin, L_FiOutPipe1a, [0; -90]*deg, ND_FiTrunk, PS_Default, ["FiCon"])
FiOutPipe1b := PipeF([
    FiExitCoupling1_origin[0] - ElbowRadius(ND_FiTrunk);
    FiExitCoupling1_origin[1];
    Z_FiOutPipe1aEnd - ElbowRadius(ND_FiTrunk)
], L_FiOutPipe1b, [0; 0]*deg, ND_FiTrunk, PS_Default)
FiOut1PipeScript := stack(FiOutPipe1a, FiOutPipe1b)
# Outlet 1 Fittings
FiExChanCoupling1 := CouplingSUBF(FiExitCoupling1_origin, [0; 90]*deg, ND_FiTrunk, PS_Default, ["FiCon"])
FiOutElbow1a := ElbowF([FiExitCoupling1_origin[0]; FiExitCoupling1_origin[1]; Z_FiOutPipe1aEnd], [0; 0; -90]*deg, ND_FiTrunk, PS_Default)
FiOut1FittingScript := stack(FiExChanCoupling1, FiOutElbow1a)
# Outlet 2 Pipes (exit box drain)
Z_FiExitDrainOutlet := Z_FiExitBottom - H_FiExitWasteDrop
X_FiExitHorizDrainPipeStart := FiInletChannel_Origin[0] + T_PlantWall - CouplingLength(ND_FiExitWaste) + SocketDepth(ND_FiExitWaste)
X_FiExitHorizDrainPipeEnd := FiExitCoupling3_origin[0] + ElbowRadius(ND_FiExitWaste)
L_FiOutPipe2a := FiExitCoupling3_origin[2] - Z_FiExitDrainOutlet - ElbowRadius(ND_FiExitWaste)
FiOutPipe2a := PipeSUBF(FiExitCoupling3_origin, L_FiOutPipe2a, [0; -90]*deg, ND_FiExitWaste, PS_Default, ["FiCon"])
FiOut2PipeScript := FiOutPipe2a
# Oulet 2 Fittings (exit box drain)
FiExChanCoupling2 := CouplingSUBF(FiExitCoupling3_origin, [0; 90]*deg, ND_FiExitWaste, PS_Default, ["FiCon"])
FiOutElbow2a := ElbowF([
    FiExitCoupling3_origin[0] + ElbowRadius(ND_FiExitWaste);
    FiExitCoupling3_origin[1];
    Z_FiExitDrainOutlet
], [90; 0; 270]*deg, ND_FiExitWaste, PS_Default)
FiOut2FittingScript := stack(FiExChanCoupling2, FiOutElbow2a)
# Outlet 3 Pipes
L_FiOut3PipeZ := FiExitCoupling2_origin[2] - (Fi_origin[2] + outerradius(ND_FiBwManBranch) + H_FiBottomLayer + ElbowRadius(ND_FiTrunk))
L_FiOut3PipeX := FiExitCoupling2_origin[0] - ((Fi_origin[0] + T_FiWall + CouplingLength(ND_FiTrunk) - SocketDepth(ND_FiTrunk)) - ElbowRadius(ND_FiTrunk))
L_FiOut3PipeY := FiExitCoupling0_origin[1] - FiExitCoupling2_origin[1] - 2*ElbowRadius(ND_FiTrunk)
FiOut3PipeZ := PipeSUBF([
    FiExitCoupling2_origin[0];
    FiExitCoupling2_origin[1];
    Fi_origin[2] + outerradius(ND_FiBwManBranch) + H_FiBottomLayer + ElbowRadius(ND_FiTrunk)
], L_FiOut3PipeZ, [0; 90]*deg, ND_FiTrunk, PS_Default, ["FiCon"])
FiOut3PipeX := PipeF([
    FiExitCoupling2_origin[0] - ElbowRadius(ND_FiTrunk);
    FiExitCoupling0_origin[1];
    Fi_origin[2] + outerradius(ND_FiBwManBranch) + H_FiBottomLayer
], L_FiOut3PipeX, [0; 0]*deg, ND_FiTrunk, PS_Default)
FiOut3PipeY := PipeF([
    FiExitCoupling2_origin[0];
    FiExitCoupling2_origin[1] + ElbowRadius(ND_FiTrunk);
    Fi_origin[2] + outerradius(ND_FiBwManBranch) + H_FiBottomLayer
], L_FiOut3PipeY, [270; 0]*deg, ND_FiTrunk, PS_Default)
FiOut3PipeScript := stack(FiOut3PipeZ, FiOut3PipeX, FiOut3PipeY)
# Outlet 3 Fittings
FiExChanCoupling3 := CouplingSUBF(FiExitCoupling2_origin, [0; 90]*deg, ND_FiTrunk, PS_Default, ["FiCon"])
FiOut3ElbowYZ := ElbowF([
    FiExitCoupling2_origin[0];
    FiExitCoupling2_origin[1] + ElbowRadius(ND_FiTrunk);
    Fi_origin[2] + outerradius(ND_FiBwManBranch) + H_FiBottomLayer
], [180; 270; 0]*deg, ND_FiTrunk, PS_Default)
FiOut3ElbowXY := ElbowF([
    FiExitCoupling2_origin[0];
    FiExitCoupling0_origin[1] - ElbowRadius(ND_FiTrunk);
    Fi_origin[2] + outerradius(ND_FiBwManBranch) + H_FiBottomLayer
], [0; 0; 0]*deg, ND_FiTrunk, PS_Default)
FiOut3FittingScript := stack(FiExChanCoupling3, FiOut3ElbowYZ, FiOut3ElbowXY)
# Inlet/Outlet Stubs
FiRemovableLayer := layer_new("FiRemovablePlu", red)
L_FiEntPipeStub := Z_FiEntranceStub - Z_FiEntranceBottom + SocketDepth(ND_FiTrunk)
L_FiExitPipeStub := Z_FiExitStub - Z_FiExitBottom + SocketDepth(ND_FiTrunk)
L_ExitBoxDrainStub := H_FiExit + SocketDepth(ND_FiExitWaste)
FiEnt1PipeStub := PipeF(FiInletCoupling1_origin + [0 m; 0 m; CouplingLength(ND_FiTrunk) - 2*SocketDepth(ND_FiTrunk)], L_FiEntPipeStub, [0; 90]*deg, ND_FiTrunk, PS_Default)
FiEnt2PipeStub := PipeF(FiInletCoupling2_origin + [0 m; 0 m; CouplingLength(ND_FiTrunk) - 2*SocketDepth(ND_FiTrunk)], L_FiEntPipeStub, [0; 90]*deg, ND_FiTrunk, PS_Default)
FiEnt3PipeStub := PipeF(FiInletCoupling3_origin + [0 m; 0 m; CouplingLength(ND_FiTrunk) - 2*SocketDepth(ND_FiTrunk)], L_FiEntPipeStub, [0; 90]*deg, ND_FiTrunk, PS_Default)
FiExit0PipeStub := PipeF(FiExitCoupling0_origin + [0 m; 0 m; CouplingLength(ND_FiTrunk) - 2*SocketDepth(ND_FiTrunk)], L_FiExitPipeStub, [0; 90]*deg, ND_FiTrunk, PS_Default)
FiExit1PipeStub := PipeF(FiExitCoupling1_origin + [0 m; 0 m; CouplingLength(ND_FiTrunk) - 2*SocketDepth(ND_FiTrunk)], L_FiExitPipeStub, [0; 90]*deg, ND_FiTrunk, PS_Default)
FiExit2PipeStub := PipeF(FiExitCoupling3_origin + [0 m; 0 m; CouplingLength(ND_FiExitWaste) - 2*SocketDepth(ND_FiExitWaste)], L_ExitBoxDrainStub, [0; 90]*deg, ND_FiExitWaste, PS_Default)
FiOut3PipeStub := PipeF([
    FiExitCoupling2_origin[0];
    FiExitCoupling2_origin[1];
    FiExitCoupling2_origin[2] + CouplingLength(ND_FiTrunk) - 2*SocketDepth(ND_FiTrunk)
], L_FiExitPipeStub, [0; 90]*deg, ND_FiTrunk, PS_Default)
FiRemovableFrz := FreezeLayer("FiRemovablePlu")
FiEntExitStubs := stack(FiRemovableLayer, FiEnt1PipeStub, FiEnt2PipeStub, FiEnt3PipeStub, FiExit0PipeStub, FiExit1PipeStub, FiExit2PipeStub, FiOut3PipeStub, FiRemovableFrz)
FiEntExitPipingScript := stack(SelectFiPipeLayer, FiIn0PipeScript, FiIn1PipeScript, FiIn2PipeScript, FiIn3PipeScript, FiOut0PipeScript, FiOut1PipeScript, FiOut2PipeScript, FiOut3PipeScript, LayerFiPipeFrz)
FiEntExitFittingScript := stack(SelectFiFittingLayer, FiIn0FittingScript, FiIn1FittingScript, FiIn2FittingScript, FiIn3FittingScript, FiOut0FittingScript, FiOut1FittingScript, FiOut2FittingScript, FiOut3FittingScript, LayerFiFittingFrz)
FiEntExitPlumbingScript := stack(FiEntExitPipingScript, FiEntExitFittingScript, FiEntExitStubs)
FiAuxScript := stack(FiAuxBoxScript, FiAuxPlumbingScript, FiEntExitPlumbingScript)
# Sand Drain
# this all needs to be updated to a wye at some point
FiSandDrainPipe_Origin := Fi_origin + [
    -L_Fi + ConRadius(ND_FiSandOutlet);
    W_Fi/2 - ConRadius(ND_FiBwTrunk) - S_Fitting;
    2*ConRadius(ND_FiBwManBranch)
]
L_FiSandDrainPipeVert := H_FiSandOutlet + CapHeight(ND_FiSandOutlet) + B_FiManifoldBranch + T_FiWall + 2*ValveLength(ND_FiSandOutlet)
FiSandDrainPipeLayer := layer_new("FiSandDrainPlu", blue)
DrawFiSandDrainPipeVert := PipeF(FiSandDrainPipe_Origin, L_FiSandDrainPipeVert, [0; 90]*deg, ND_FiSandOutlet, PS_Default)
L_FiSandDrainPipeAngled := sqrt(2)*(2*outerradius(ND_FiSandOutlet) + B_FiManifoldBranch + T_FiWall + 2*ValveLength(ND_FiSandOutlet) - (ValveLength(ND_FiSandOutlet) + ValveSocket(ND_FiSandOutlet))/sqrt(2))
DrawFiSandDrainPipeAngled := PipeSUBF([
    FiSandDrainPipe_Origin[0] - (B_FiManifoldBranch + T_FiWall + 2*ValveLength(ND_FiSandOutlet));
    FiSandDrainPipe_Origin[1];
    Fi_origin[2] + H_FiSandOutlet - (ValveLength(ND_FiSandOutlet) + ValveSocket(ND_FiSandOutlet))/sqrt(2) + 2*outerradius(ND_FiManBranch)
], L_FiSandDrainPipeAngled, [0; 135]*deg, ND_FiSandOutlet, PS_Default, ["FiTank"])
DrawFiOutletCap := CapF([0; 0; L_FiSandDrainPipeVert] + FiSandDrainPipe_Origin, [0; 270]*deg, ND_FiSandOutlet)
DrawFiSandOutletValve := insertdwg("https://confluence.cornell.edu/download/attachments/173604905/Fi-Scaled-Gate-Valve-Threaded.dwg", [
    FiSandDrainPipe_Origin[0] - (B_FiManifoldBranch + T_FiWall + 2*ValveLength(ND_FiSandOutlet)) - (ValveLength(ND_FiSandOutlet) - ValveSocket(ND_FiSandOutlet))/sqrt(2);
    FiSandDrainPipe_Origin[1];
    Fi_origin[2] + H_FiSandOutlet - (ValveLength(ND_FiSandOutlet) + ValveSocket(ND_FiSandOutlet))/sqrt(2) + 2*outerradius(ND_FiManBranch) - (ValveLength(ND_FiSandOutlet) - ValveSocket(ND_FiSandOutlet))/sqrt(2)
], 2*outerradius(ND_FiSandOutlet)/(1.16 m), 2*outerradius(ND_FiSandOutlet)/(1.16 m), 0 deg)
RotateFiSandOutletValve1 := Rotate3DLast([
    FiSandDrainPipe_Origin[0] - (B_FiManifoldBranch + T_FiWall + 2*ValveLength(ND_FiSandOutlet)) - (ValveLength(ND_FiSandOutlet) - ValveSocket(ND_FiSandOutlet))/sqrt(2);
    FiSandDrainPipe_Origin[1];
    Fi_origin[2] + H_FiSandOutlet - (ValveLength(ND_FiSandOutlet) + ValveSocket(ND_FiSandOutlet))/sqrt(2) + 2*outerradius(ND_FiManBranch) - (ValveLength(ND_FiSandOutlet) - ValveSocket(ND_FiSandOutlet))/sqrt(2)
], "z", 180 deg)
RotateFiSandOutletValve2 := Rotate3DLast([
    FiSandDrainPipe_Origin[0] - (B_FiManifoldBranch + T_FiWall + 2*ValveLength(ND_FiSandOutlet)) - (ValveLength(ND_FiSandOutlet) - ValveSocket(ND_FiSandOutlet))/sqrt(2);
    FiSandDrainPipe_Origin[1];
    Fi_origin[2] + H_FiSandOutlet - (ValveLength(ND_FiSandOutlet) + ValveSocket(ND_FiSandOutlet))/sqrt(2) + 2*outerradius(ND_FiManBranch) - (ValveLength(ND_FiSandOutlet) - ValveSocket(ND_FiSandOutlet))/sqrt(2)
], "y", -45 deg)
FreezeFiSandDrain := FreezeLayer("FiSandDrainPlu")
FiSandDrainScript := stack(FiSandDrainPipeLayer, DrawFiSandDrainPipeVert, DrawFiSandDrainPipeAngled, DrawFiOutletCap, DrawFiSandOutletValve, RotateFiSandOutletValve1, RotateFiSandOutletValve2, FreezeFiSandDrain)
# Backwash Siphon
L_FiSiphonPipeBottom := W_PlantDC/2 + FiInletChannel_Origin[0] - (Fi_origin[0] + T_FiWall + SocketDepth(ND_FiSiphon) + ShortTeeLength(ND_FiSiphon) + ElbowRadius(ND_FiSiphon)) - ElbowRadius(ND_FiSiphon) = 2.84168 m
X_FiSiphonPipe1End := Fi_origin[0] + T_FiWall - CouplingLength(ND_FiSiphon) + SocketDepth(ND_FiSiphon) - max((T_FiWall - CouplingLength(ND_FiSiphon)) + 2*SocketDepth(ND_FiSiphon), 2*SocketDepth(ND_FiSiphon))
X_FiSiphonManifoldStart := X_FiSiphonPipe1End - ElbowRadius(ND_FiSiphon) - ShortTeeLength(ND_FiSiphon)
X_FiSiphonManifoldEnd := Fi_origin[0] - L_Fi
# Siphon Fittings Other than Drain Channel Coupling
FiSiphonCoupling := CouplingSUBF([
    Fi_origin[0] + T_FiWall - SocketDepth(ND_FiSiphon);
    Fi_origin[1] + S_Fitting + ConRadius(ND_FiSiphon);
    Z_FiSiphonCoupling
], [0; 0]*deg, ND_FiSiphon, PS_Default, ["FiTankCon"])
FiSiphonTee := TeeF([
    Fi_origin[0] - L_Fi/2;
    Fi_origin[1] + S_Fitting + ConRadius(ND_FiSiphon);
    Z_FiSiphonInlet - outerradius(ND_FiSiphon) + ShortTeeLength(ND_FiSiphon)
], [0; 0; 90]*deg, ND_FiSiphon, PS_Default)
FiSiphonElbow1 := ElbowF([
    Fi_origin[0] - L_Fi/2 + ElbowRadius(ND_FiSiphon);
    Fi_origin[1] + S_Fitting + ConRadius(ND_FiSiphon);
    Z_FiSiphonCoupling
], [90; 0; 90]*deg, ND_FiSiphon, PS_Default)
FiSiphonManifoldCap1 := CapF([
    X_FiSiphonManifoldEnd + ConRadius(ND_FiSiphon) - outerradius(ND_FiSiphon);
    Fi_origin[1] + S_Fitting + ConRadius(ND_FiSiphon);
    Z_FiSiphonInlet - outerradius(ND_FiSiphon)
], [180; 0]*deg, ND_FiSiphon)
FiSiphonManifoldCap2 := CapF([
    Fi_origin[0] - ConRadius(ND_FiSiphon) + outerradius(ND_FiSiphon);
    Fi_origin[1] + S_Fitting + ConRadius(ND_FiSiphon);
    Z_FiSiphonInlet - outerradius(ND_FiSiphon)
], [0; 0]*deg, ND_FiSiphon)
FiSiphonTee2_Origin := [
    Fi_origin[0] + T_FiWall + SocketDepth(ND_FiSiphon);
    Fi_origin[1] + S_Fitting + ConRadius(ND_FiSiphon);
    Z_FiSiphonCoupling
]
FiSiphonTee2 := TeeF(FiSiphonTee2_Origin, [90; 0; 90]*deg, ND_FiSiphon, PS_Default)
FiSiphonElbow0 := ElbowF([
    Fi_origin[0] + T_FiWall + SocketDepth(ND_FiSiphon) + ShortTeeLength(ND_FiSiphon) + ElbowRadius(ND_FiSiphon);
    Fi_origin[1] + S_Fitting + ConRadius(ND_FiSiphon);
    Fi_origin[2]
], [90; 0; 270]*deg, ND_FiSiphon, PS_Default)
FiSiphonElbow01 := ElbowF([
    Fi_origin[0] + T_FiWall + SocketDepth(ND_FiSiphon) + ShortTeeLength(ND_FiSiphon) + ElbowRadius(ND_FiSiphon) + L_FiSiphonPipeBottom;
    Fi_origin[1] + S_Fitting + ConRadius(ND_FiSiphon);
    Fi_origin[2]
], [270; 0; 90]*deg, ND_FiSiphon, PS_Default)
FiSiphonReducerCyl1 := CylinderF([
    Fi_origin[0] + T_FiWall + SocketDepth(ND_FiSiphon) + ShortTeeLength(ND_FiSiphon);
    Fi_origin[1] + S_Fitting + ConRadius(ND_FiSiphon);
    Z_FiSiphonCoupling + ShortTeeLength(ND_FiSiphon)
], outerradius(ND_FiSiphon), SocketDepth(ND_FiSiphon), [0; 90]*deg)
FiSiphonReducerCyl2 := CylinderF([
    Fi_origin[0] + T_FiWall + SocketDepth(ND_FiSiphon) + ShortTeeLength(ND_FiSiphon);
    Fi_origin[1] + S_Fitting + ConRadius(ND_FiSiphon);
    Z_FiSiphonCoupling + ShortTeeLength(ND_FiSiphon)
], outerradius(ND_FiSiphonAirValve), SocketDepth(ND_FiSiphon), [0; 90]*deg)
FiSiphonReducerSubtract := SubtractF(["FiFittingsPlu"], "DeleteMe")
SelectFiValveLayer := SelectLayer("FiValvePlu")
FiSiphonAirValve := insertdwg("https://confluence.cornell.edu/download/attachments/173604905/FiMetalBallValve.dwg", [
    Fi_origin[0] + T_FiWall + SocketDepth(ND_FiSiphon) + ShortTeeLength(ND_FiSiphon);
    Fi_origin[1] + S_Fitting + ConRadius(ND_FiSiphon);
    Z_FiSiphonCoupling + ShortTeeLength(ND_FiSiphon) + SocketDepth(ND_FiSiphon)
], 2*outerradius(ND_FiSiphonAirValve)*1/(125 in), 2*outerradius(ND_FiSiphonAirValve)*1/(125 in), 0 deg)
FiSiphonAirValveReducer := stack(FiSiphonReducerCyl1, LayerFiFittingFrz, FiSiphonReducerCyl2, GroupDelete, FiSiphonReducerSubtract)
SelectFiFerncos := SelectLayer("FiFerncoCouplingsPlu")
FiSiphonFernco := FerncoCouplingF([Fi_origin[0]; Fi_origin[1] + S_Fitting + ConRadius(ND_FiSiphon); Z_FiSiphonCoupling], [0; 0; 0]*deg, ND_FiSiphon, L_FiManFerncoCoupling)
FiSiphonFittingScript := stack(SelectFiFittingLayer, FiSiphonCoupling, FiSiphonTee, FiSiphonElbow1, FiSiphonManifoldCap1, FiSiphonManifoldCap2, FiSiphonTee2, FiSiphonElbow0, FiSiphonElbow01, FiSiphonAirValveReducer, SelectFiValveLayer, FiSiphonAirValve, LayerFiValveFrz, SelectFiFerncos, FiSiphonFernco, LayerFiFerncoFreeze)
# Siphon Pipes Up Until Drain Channel
L_FiSiphonManifold := L_Fi/2 - ShortTeeLength(ND_FiSiphon) - ConRadius(ND_FiSiphon) + outerradius(ND_FiSiphon) = 0.290384 m
L_FiSiphonPipe1a := T_FiWall - CouplingLength(ND_FiSiphon) + SocketDepth(ND_FiSiphon) + L_FiManFerncoCoupling/2 = 0.16825 m
L_FiSiphonPipe1b := L_Fi/2 - ElbowRadius(ND_FiSiphon) - L_FiManFerncoCoupling/2 = 0.192596 m
L_FiSiphonPipe2 := Z_FiSiphonCoupling - ElbowRadius(ND_FiSiphon) - (Z_FiSiphonInlet - outerradius(ND_FiSiphon) + ShortTeeLength(ND_FiSiphon)) = 1.41918 m
L_FiSiphonPipe3 := 2*SocketDepth(ND_FiSiphon)
L_FiSiphonPipe4 := Z_FiSiphonCoupling - ElbowRadius(ND_FiSiphon) - ShortTeeLength(ND_FiSiphon) - Fi_origin[2]
FiSiphonPipe2 := PipeF([
    Fi_origin[0] - L_Fi/2;
    Fi_origin[1] + S_Fitting + ConRadius(ND_FiSiphon);
    Z_FiSiphonCoupling - ElbowRadius(ND_FiSiphon)
], L_FiSiphonPipe2, [0; -90]*deg, ND_FiSiphon, PS_Default)
FiSiphonManifold1 := PipeF([
    Fi_origin[0] - L_Fi/2 - ShortTeeLength(ND_FiSiphon);
    Fi_origin[1] + S_Fitting + ConRadius(ND_FiSiphon);
    Z_FiSiphonInlet - outerradius(ND_FiSiphon)
], L_Fi/2 - ShortTeeLength(ND_FiSiphon) - ConRadius(ND_FiSiphon) + outerradius(ND_FiSiphon), [0; 0]*deg, ND_FiSiphon, PS_Default)
FiSiphonManifold2 := PipeF([
    Fi_origin[0] - ConRadius(ND_FiSiphon) + outerradius(ND_FiSiphon);
    Fi_origin[1] + S_Fitting + ConRadius(ND_FiSiphon);
    Z_FiSiphonInlet - outerradius(ND_FiSiphon)
], L_Fi/2 - ShortTeeLength(ND_FiSiphon) - ConRadius(ND_FiSiphon) + outerradius(ND_FiSiphon), [0; 0]*deg, ND_FiSiphon, PS_Default)
FiSiphonPipe3 := PipeF([
    Fi_origin[0] + T_FiWall - SocketDepth(ND_FiSiphon);
    Fi_origin[1] + S_Fitting + ConRadius(ND_FiSiphon);
    Z_FiSiphonCoupling
], L_FiSiphonPipe3, [180; 0]*deg, ND_FiSiphon, PS_Default)
FiSiphonPipe4 := PipeF([
    Fi_origin[0] + T_FiWall + SocketDepth(ND_FiSiphon) + ShortTeeLength(ND_FiSiphon);
    Fi_origin[1] + S_Fitting + ConRadius(ND_FiSiphon);
    Z_FiSiphonCoupling - ShortTeeLength(ND_FiSiphon)
], L_FiSiphonPipe4, [0; -90]*deg, ND_FiSiphon, PS_Default)
FiSiphonPipe5 := PipeF([
    Fi_origin[0] + T_FiWall + SocketDepth(ND_FiSiphon) + ShortTeeLength(ND_FiSiphon) + ElbowRadius(ND_FiSiphon) + L_FiSiphonPipeBottom;
    Fi_origin[1] + S_Fitting + ConRadius(ND_FiSiphon);
    Fi_origin[2]
], L_FiSiphonPipeBottom, [0; 0], ND_FiSiphon, PS_Default)
FiSiphonPipeScript := stack(SelectFiPipeLayer, FiSiphonPipe2, FiSiphonManifold1, FiSiphonManifold2, FiSiphonPipe3, FiSiphonPipe4, FiSiphonPipe5, LayerFiPipeFrz)
# Siphon Manifold Orifices
FirstFiSiphonManOrifice := CylinderF([
    Fi_origin[0] - B_FiSiphonManOrifices/2 - ConRadius(ND_FiSiphon) + outerradius(ND_FiSiphon);
    Fi_origin[1] + S_Fitting + ConRadius(ND_FiSiphon);
    Z_FiSiphonInlet - outerradius(ND_FiSiphon)
], D_FiSiphonManOrifices/2, 1.2*ConRadius(ND_FiSiphon), [0; 90]*deg)
ArrayFiSiphonManOrifices := array_all(1, N_FiSiphonManOrifices/2, -B_FiSiphonManOrifices)
MirrorFiSiphonManOrifices := Mirror3dAll("yz", [Fi_origin[0] - L_Fi/2; 0 m], "n")
FiSiphonOrifices := stack(FirstFiSiphonManOrifice, ArrayFiSiphonManOrifices, MirrorFiSiphonManOrifices)
SubtractFiSiphonOrificesPipe := SubtractF(["FiPipePlu"], "DeleteMe")
FiSiphonPipe1a := PipeSUBF([
    Fi_origin[0] + T_FiWall - CouplingLength(ND_FiSiphon) + SocketDepth(ND_FiSiphon);
    Fi_origin[1] + S_Fitting + ConRadius(ND_FiSiphon);
    Z_FiSiphonCoupling
], L_FiSiphonPipe1a, [0; 0]*deg, ND_FiSiphon, PS_Default, ["FiTankCon"])
# these need to be stacked after the orifices, otherwise the pipes effectively union after the subtraction
FiSiphonPipe1b := PipeF([
    Fi_origin[0] - L_FiManFerncoCoupling/2;
    Fi_origin[1] + S_Fitting + ConRadius(ND_FiSiphon);
    Z_FiSiphonCoupling
], L_FiSiphonPipe1b, [0; 0]*deg, ND_FiSiphon, PS_Default)
SubtractFiSiphonOrificesCaps := SubtractF(["FiFittingsPlu"], "DeleteMe")
FiSiphonManOrificeScript := stack(FiSiphonOrifices, GroupDelete, SubtractFiSiphonOrificesPipe, FiSiphonOrifices, GroupDelete, SubtractFiSiphonOrificesCaps, SelectFiPipeLayer, FiSiphonPipe1a, FiSiphonPipe1b, LayerFiPipeFrz)
FiSiphonScript := stack(FiSiphonFittingScript, FiSiphonPipeScript, FiSiphonManOrificeScript)
# Array the Filter and Union Concrete
ThawFilter := ThawMultiple(["Fi*"])
FiArray1Frz := ["FiAuxPipePlu"; "FiAuxFittingPlu"; "FiAuxRemovablePlu"; "FiDistPipePlu"; "FiDistFittingPlu"; "FiCon"; "FiInletChannelCon"; "FiInletFittingsPlu"; "FiInletPipePlu"]
FreezeFiPieces := FreezeMultiple(FiArray1Frz)
ArrayFi1 := Array_All(N_Fi, 1, -(W_Fi + T_FiWall))
FreezeFi := FreezeMultiple(["Fi*"])
FiArray2Thw := ["FiAuxPipePlu"; "FiAuxFittingPlu"; "FiAuxRemovablePlu"; "FiDistPipePlu"; "FiDistFittingPlu"; "FiCon"]
ThawFiPieces := ThawMultiple(FiArray2Thw)
ArrayFi2 := Array_All(N_Fi - (N_Fi > 1), 1, -(W_FiEntrance + 2*T_PlantWall + W_FiOverflow))
ThawFilterConcrete := ThawMultiple(["Fi*Con"])
GroupFilterConcrete := GroupAll("FiCon")
FiArrayScript :=
    stack(ThawFilterConcrete, Union_All, GroupFilterConcrete, FreezeFi) if N_Fi == 1
    stack(ThawFilter, FreezeFiPieces, ArrayFi1, FreezeFi, ThawFiPieces, ArrayFi2, FreezeFi, ThawFilterConcrete, Union_All, GroupFilterConcrete, FreezeFi) otherwise
# Overflow, Inlet and Distribution Weirs, and Adjust Wall Thickness
FiEntranceCutout := BoxF(FiEntranceBox_origin, FiEntranceBox_origin + [-L_FiEntrance; W_FiEntrance; H_FiEntrance], [0; 0; 0]*deg)
FiExitCutout := BoxF(FiExitBox_origin, FiExitBox_origin + [-L_FiExit; W_FiEntrance; H_FiEntrance], [0; 0; 0]*deg)
FiOverflowCutout := BoxF(FiOverflowBox_Origin, FiOverflowBox_Origin + [-L_FiEntrance; W_FiOverflow; H_FiEntrance], [0; 0; 0]*deg)
FiDistCutout := BoxF(FiDistBox_Origin, FiDistBox_Origin + [-L_FiExit; W_FiOverflow; H_FiEntrance], [0; 0; 0]*deg)
FiIChannelCutout := BoxF(FiInletChannel_Origin + [-W_FiInletChannel; 0; 0], FiInletChannel_Origin + [-W_FiInletChannel + T_PlantWall; L_FiInletChannel; H_FiInletChannel], [0; 0; 0]*deg)
FiArrayWallAdjust := BoxF(FiOverflowBox_Origin + [T_PlantWall; -T_ChannelWall; -T_PlantWall], FiOverflowBox_Origin + [-W_FiEntrance - T_ChannelWall - W_FiEntrance - T_PlantWall; -T_PlantWall; H_FiEntrance], [0; 0; 0]*deg)
FiWallThicknessCutouts :=
    stack(FiEntranceCutout, FiExitCutout, FiOverflowCutout, FiDistCutout, FiIChannelCutout) if N_Fi < 2
    stack(FiEntranceCutout, FiExitCutout, FiOverflowCutout, FiDistCutout, FiIChannelCutout, FiArrayWallAdjust) otherwise
FiEntWeir := BoxF([FiEntranceBox_origin[0]; FiEntranceBox_origin[1]; Z_FiEntranceWeir], [FiEntranceBox_origin[0] + T_PlantWall; FiEntranceBox_origin[1] + W_FiEntrance; Z_FiTop], [0; 0; 0]*deg)
ArrayFiEntWeir := ArrayLast(N_Fi, 1, -(2*T_ChannelWall + W_FiEntrance + W_FiOverflow))
FiOverflowWeirs := BoxF([FiEntranceBox_origin[0] - L_FiEntrance; FiEntranceBox_origin[1]; Z_FiOverflowWeir], [
    FiEntranceBox_origin[0] - L_FiEntrance + L_FiOverflowWeir;
    FiEntranceBox_origin[1] - T_ChannelWall - (N_Fi > 1)*(N_Fi - 1)*(W_FiOverflow + T_ChannelWall) - (N_Fi > 2)*(N_Fi - 2)*(W_FiEntrance + T_ChannelWall);
    Z_FiTop
], [0; 0; 0]*deg)
FiDistBarrierCut := BoxF(FiExitBox_origin + [0 m; 0 m; H_FiExit], FiExitBox_origin + [
    -L_FiExit;
    -T_ChannelWall - (N_Fi > 1)*(N_Fi - 1)*(W_FiOverflow + T_ChannelWall) - (N_Fi > 2)*(N_Fi - 2)*(W_FiEntrance + T_ChannelWall);
    H_FiDistBarrier
], [0; 0; 0]*deg)
FiSubtractWeirs := SubtractF(["FiCon"], "DeleteMe")
FiWeirScript := stack(FiEntWeir, ArrayFiEntWeir, FiOverflowWeirs, FiDistBarrierCut, FiWallThicknessCutouts, GroupDelete, FiSubtractWeirs)
SelectDistFittingLayer := SelectLayer("FiDistFittingPlu")
FiDistElbow2 := ElbowF([
    min(FiExitBox_origin[0] - L_FiExit/2 - ElbowRadius(ND_DistPipe) - 2*SocketDepth(ND_DistPipe), FiExitBox_origin[0] - L_FiExit - T_PlantWall);
    FiEntranceBox_origin[1] - T_ChannelWall - W_FiOverflow/2;
    Z_FiDistPipe
], [90; 0; 0]*deg, ND_DistPipe, PS_Default)
FiDistTee := TeeF([
    min(FiExitBox_origin[0] - L_FiExit/2 - ElbowRadius(ND_DistPipe) - 2*SocketDepth(ND_DistPipe), FiExitBox_origin[0] - L_FiExit - T_PlantWall) - ElbowRadius(ND_DistPipe) + ShortTeeLength(ND_DistPipe);
    FiEntranceBox_origin[1] - W_FiEntrance - 2*T_PlantWall - 3/2*W_FiOverflow - T_ChannelWall;
    Z_FiDistPipe
], [270; 0; 0]*deg, ND_DistPipe, PS_Default)
ArrayFiDist := ArrayLast(N_Fi - 2, 1, -(W_FiEntrance + W_FiOverflow + 2*T_PlantWall))
FiDistFinishFittingScript :=
    stack(SelectDistFittingLayer, FiDistElbow2, FiDistFittingFrz) if N_Fi ≤ 2
    stack(SelectDistFittingLayer, FiDistElbow2, FiDistTee, ArrayFiDist, FiDistFittingFrz) otherwise
SelectDistPipeLayer := SelectLayer("FiDistPipePlu")
L_FiDistPipe2 := max(L_FiExit/2 - ElbowRadius(ND_DistPipe) + T_PlantWall, 2*SocketDepth(ND_DistPipe))
L_FiDistPipe3 := W_FiOverflow + W_FiEntrance + 2*T_PlantWall - ElbowRadius(ND_DistPipe) - TeeLength(ND_DistPipe)/2
L_FiDistPipe4 := max(L_FiExit/2 - ElbowRadius(ND_DistPipe) + T_PlantWall, 2*SocketDepth(ND_DistPipe)) + ElbowRadius(ND_DistPipe) - ShortTeeLength(ND_DistPipe)
L_FiDistPipe5 := W_FiOverflow + W_FiEntrance + 2*T_PlantWall - TeeLength(ND_DistPipe)
FiDistPipe2 := PipeF([
    FiExitBox_origin[0] - L_FiExit/2 - ElbowRadius(ND_DistPipe);
    FiEntranceBox_origin[1] - T_ChannelWall - W_FiOverflow/2;
    Z_FiDistPipe
], L_FiDistPipe2, [0; 0; 0]*deg, ND_DistPipe, PS_Default)
FiDistPipe3 := PipeF([
    min(FiExitBox_origin[0] - L_FiExit/2 - ElbowRadius(ND_DistPipe) - 2*SocketDepth(ND_DistPipe), FiExitBox_origin[0] - L_FiExit - T_PlantWall) - ElbowRadius(ND_DistPipe);
    FiEntranceBox_origin[1] - T_ChannelWall - W_FiOverflow/2 - ElbowRadius(ND_DistPipe);
    Z_FiDistPipe
], L_FiDistPipe3, [90; 0; 0]*deg, ND_DistPipe, PS_Default)
FiDistPipe4 := PipeF([
    FiExitBox_origin[0] - L_FiExit/2 - ElbowRadius(ND_DistPipe);
    FiEntranceBox_origin[1] - W_FiEntrance - 2*T_PlantWall - 3/2*W_FiOverflow - T_ChannelWall;
    Z_FiDistPipe
], L_FiDistPipe4, [0; 0; 0]*deg, ND_DistPipe, PS_Default)
FiDistPipe5 := PipeF([
    min(FiExitBox_origin[0] - L_FiExit/2 - ElbowRadius(ND_DistPipe) - 2*SocketDepth(ND_DistPipe), FiExitBox_origin[0] - L_FiExit - T_PlantWall) - ElbowRadius(ND_DistPipe);
    FiEntranceBox_origin[1] - W_FiEntrance - 2*T_PlantWall - 3/2*W_FiOverflow - TeeLength(ND_DistPipe)/2 - T_ChannelWall;
    Z_FiDistPipe
], L_FiDistPipe5, [90; 0; 0]*deg, ND_DistPipe, PS_Default)
FiDistFinishPipeScript :=
    stack(SelectDistPipeLayer, FiDistPipe2, FiDistPipe3, FiDistPipeFrz) if N_Fi ≤ 2
    stack(SelectDistPipeLayer, FiDistPipe2, FiDistPipe3, FiDistPipe4, ArrayFiDist, FiDistPipe5, ArrayFiDist, FiDistPipeFrz) otherwise
FiDistFinishScript := stack(FiDistFinishFittingScript, FiDistFinishPipeScript)
# Finish Distribution Plumbing
# Finish Siphon Plumbing
# Channel Coupling
FiSiphonChannelCoupling_Origin := [
    Fi_origin[0] + T_FiWall + SocketDepth(ND_FiSiphon) + ShortTeeLength(ND_FiSiphon) + 2*ElbowRadius(ND_FiSiphon) + L_FiSiphonPipeBottom;
    Fi_origin[1] + S_Fitting + ConRadius(ND_FiSiphon);
    PlantLowerDC_Origin[2] - H_PlantDC - Slope_PlantDC*(L_PlantLowerDC - (T_PlantWall + Fi_origin[1] + S_Fitting + 2*ConRadius(ND_FiSiphon))) - SocketDepth(ND_FiSiphon)
]
FiSiphonChannelCoupling(N) := CouplingSUBF(FiSiphonChannelCoupling_Origin + (N - 1)*[0 m; -W_Fi - T_FiWall; -Slope_PlantDC*(W_Fi + T_FiWall)], [0; 270]*deg, ND_FiSiphon, PS_Default, ["DrainChannelCon"])
FiSiphonChannelCouplingScript :=
    N ← 1
    Local ← stack(SelectFiFittingLayer, FiSiphonChannelCoupling(N))
    while N_Fi > N
        N ← N + 1
        Local ← stack(Local, FiSiphonChannelCoupling(N))
    Local ← stack(Local, LayerFiFittingFrz)
    return Local
# Pipe Beneath Drain Channel
FiSiphonChannelPipe_Origin := [
    Fi_origin[0] + T_FiWall + SocketDepth(ND_FiSiphon) + ShortTeeLength(ND_FiSiphon) + 2*ElbowRadius(ND_FiSiphon) + L_FiSiphonPipeBottom;
    Fi_origin[1] + S_Fitting + ConRadius(ND_FiSiphon);
    Fi_origin[2] + ElbowRadius(ND_FiSiphon)
]
L_FiSiphonChannelPipe1 := FiSiphonChannelCoupling_Origin[2] - CouplingLength(ND_FiSiphon) + 2*SocketDepth(ND_FiSiphon) - (Z_FiBottom + ElbowRadius(ND_FiSiphon)) = 1.37408 m
FiSiphonChannelPipe(N) := PipeSUBF(FiSiphonChannelPipe_Origin + (N - 1)*[0 m; -W_Fi - T_FiWall; 0 m], L_FiSiphonChannelPipe1 - (N - 1)*Slope_PlantDC*(W_Fi + T_FiWall), [0; 90]*deg, ND_FiSiphon, PS_Default, ["DrainChannelCon"])
FiSiphonChannelPipeScript :=
    N ← 1
    Local ← stack(SelectFiPipeLayer, FiSiphonChannelPipe(N))
    while N_Fi > N
        N ← N + 1
        Local ← stack(Local, FiSiphonChannelPipe(N))
    return Local
# Drain Channel Stub
L_FiSiphonChannelStub := Z_FiSiphonOutlet - FiSiphonChannelCoupling_Origin[2] = 0.265652 m
FiSiphonChannelStub(N) := PipeF(FiSiphonChannelCoupling_Origin + (N - 1)*[0 m; -W_Fi - T_FiWall; -Slope_PlantDC*(W_Fi + T_FiWall)], L_FiSiphonChannelStub + (N - 1)*Slope_PlantDC*(W_Fi + T_FiWall), [0; 90; 0]*deg, ND_FiSiphon, PS_Default)
FiSiphonChannelStubScript :=
    N ← 1
    Local ← FiSiphonChannelStub(N)
    while N_Fi > N
        N ← N + 1
        Local ← stack(Local, FiSiphonChannelStub(N))
    Local ← stack(Local, LayerFiPipeFrz)
    return Local
FiSiphonFinishScript := stack(FiSiphonChannelCouplingScript, FiSiphonChannelPipeScript, FiSiphonChannelStubScript)
# Finish Box Drain Plumbing
# Overflow Box Drain Couplings and Elbow
FiOverflowDrainElbow(N) := ElbowSUBF([
    X_FiOverflowHorizDrainPipeEnd - ElbowRadius(ND_FiEntOverflow);
    FiEntranceBox_origin[1] - T_ChannelWall - W_FiOverflow/2 - (N - 1)*(W_Fi + T_FiWall);
    Z_FiOverflowVertDrainPipeEnd
], [180; 0; 90]*deg, ND_FiEntOverflow, PS_Default, ["FiCon"])
FiOverflowDrainElbowScript :=
    N ← 1
    Local ← stack(SelectFiFittingLayer, FiOverflowDrainElbow(N))
    while N_Fi - 1 > N
        N ← N + 1
        Local ← stack(Local, FiOverflowDrainElbow(N))
    return Local
# the elbow is stacked within the coupling!!!
FiOverflowDrainCouplingHoriz(N) := CouplingSUBF([
    FiInletChannel_Origin[0] + T_PlantWall - SocketDepth(ND_FiEntOverflow);
    FiEntranceBox_origin[1] - T_ChannelWall - W_FiOverflow/2 - (N - 1)*(W_Fi + T_FiWall);
    Z_FiOverflowVertDrainPipeEnd - ElbowRadius(ND_FiEntOverflow)
], [0; 0], ND_FiEntOverflow, PS_Default, ["DrainChannelCon"])
FiOverflowCouplingFinishScript :=
    N ← 1
    Local ← stack(FiOverflowDrainElbowScript, FiOverflowDrainCouplingHoriz(N))
    while N_Fi - 1 > N
        N ← N + 1
        Local ← stack(Local, FiOverflowDrainCouplingHoriz(N))
    Local ← stack(Local, LayerFiFittingFrz)
    return Local
# Overflow Box Drain Horizontal Pipes
FiOverflowDrainPipeHoriz(N) := PipeSUBF([
    X_FiOverflowHorizDrainPipeStart;
    FiEntranceBox_origin[1] - T_ChannelWall - W_FiOverflow/2 - (N - 1)*(W_Fi + T_FiWall);
    Z_FiOverflowVertDrainPipeEnd - ElbowRadius(ND_FiEntOverflow)
], X_FiOverflowHorizDrainPipeStart - X_FiOverflowHorizDrainPipeEnd, [0; 0], ND_FiEntOverflow, PS_Default, ["DrainChannelCon"])
FiOverflowPipeFinishScript :=
    N ← 1
    Local ← stack(SelectFiPipeLayer, FiOverflowDrainPipeHoriz(N))
    while N_Fi - 1 > N
        N ← N + 1
        Local ← stack(Local, FiOverflowDrainPipeHoriz(N))
    Local ← stack(Local, LayerFiPipeFrz)
    return Local
# Exit Box Drain Couplings
FiExitDrainChanCoupling(N) := CouplingSUBF([
    FiInletChannel_Origin[0] + T_PlantWall - SocketDepth(ND_FiExitWaste);
    FiExitCoupling3_origin[1] - (N - 1)*(W_Fi + T_FiWall);
    Z_FiExitDrainOutlet
], [0; 0], ND_FiExitWaste, PS_Default, ["DrainChannelCon"])
FiExitHorizDrainCouplingScript :=
    N ← 1
    Local ← stack(SelectFiFittingLayer, FiExitDrainChanCoupling(N))
    while N_Fi > N
        N ← N + 1
        Local ← stack(Local, FiExitDrainChanCoupling(N))
    Local ← stack(Local, LayerFiFittingFrz)
    return Local
# Exit Box Drain Horizontal Pipes
L_FiExitDrainPipeHoriz := X_FiExitHorizDrainPipeStart - X_FiExitHorizDrainPipeEnd
FiExitDrainPipeHoriz(N) := PipeSUBF([
    X_FiExitHorizDrainPipeStart;
    FiExitCoupling3_origin[1] - (N - 1)*(W_Fi + T_FiWall);
    Z_FiExitDrainOutlet
], L_FiExitDrainPipeHoriz, [0; 0], ND_FiExitWaste, PS_Default, ["DrainChannelCon"])
FiExitHorizDrainPipeScript :=
    N ← 1
    Local ← stack(SelectFiPipeLayer, FiExitDrainPipeHoriz(N))
    while N_Fi > N
        N ← N + 1
        Local ← stack(Local, FiExitDrainPipeHoriz(N))
    Local ← stack(Local, LayerFiPipeFrz)
    return Local
FiBoxDrainFinishScript := stack(FiOverflowCouplingFinishScript, FiOverflowPipeFinishScript, FiExitHorizDrainCouplingScript, FiExitHorizDrainPipeScript)
# Adding Boxes to Show Heights of Water and Sand
FiWaterLayer := layer_new("FiWater", blue2)
Water_FiInletChannel := BoxF(FiInletChannel_Origin, FiInletChannel_Origin + [-W_FiInletChannel; L_FiInletChannel; ZW_FiInletChannel - FiInletChannel_Origin[2]], [0; 0; 0]*deg)
Water_FiEntranceBoxTerminal := BoxF(FiEntranceBox_origin, FiEntranceBox_origin + [-L_FiEntrance; W_FiEntrance; ZW_FiEntranceTerminal - FiEntranceBox_origin[2]], [0; 0; 0]*deg)
Water_FiBoxTerminal := BoxF(Fi_origin, Fi_origin + [-L_Fi; W_Fi; ZW_FiMax - Z_FiBottom], [0; 0; 0]*deg)
Water_FiEntranceBoxClean := BoxF(FiEntranceBox_origin, FiEntranceBox_origin + [-L_FiEntrance; W_FiEntrance; ZW_FiEntranceCleanForward - FiEntranceBox_origin[2]], [0; 0; 0]*deg)
Water_FiBoxClean := BoxF(Fi_origin, Fi_origin + [-L_Fi; W_Fi; ZW_FiClean - Z_FiBottom], [0; 0; 0]*deg)
Water_FiEntranceBoxBw := BoxF(FiEntranceBox_origin, FiEntranceBox_origin + [-L_FiEntrance; W_FiEntrance; ZW_FiEntranceBwSS - FiEntranceBox_origin[2]], [0; 0; 0]*deg)
Water_FiBoxBw := BoxF(Fi_origin, Fi_origin + [-L_Fi; W_Fi; ZW_FiBwSS - Z_FiBottom], [0; 0; 0]*deg)
FreezeFiWater := FreezeLayer("FiWater")
FiWaterTerminalScript := stack(FiWaterLayer, Water_FiInletChannel, Water_FiEntranceBoxTerminal, Water_FiBoxTerminal, FreezeFiWater)
FiWaterCleanScript := stack(FiWaterLayer, Water_FiInletChannel, Water_FiEntranceBoxClean, Water_FiBoxClean, FreezeFiWater)
FiWaterBwScript := stack(FiWaterLayer, Water_FiInletChannel, Water_FiEntranceBoxBw, Water_FiBoxBw, FreezeFiWater)
FiSandLayer := layer_new("FiSand", yellow)
Sand_FiBoxForward := BoxF(Fi_origin, Fi_origin + [-L_Fi; W_Fi; H_FiSand], [0; 0; 0]*deg)
Sand_FiBoxBw := BoxF(Fi_origin, Fi_origin + [-L_Fi; W_Fi; H_FiFluidizedBed], [0; 0; 0]*deg)
FreezeFiSand := FreezeLayer("FiSand")
FiSandForwardScript := stack(FiSandLayer, Sand_FiBoxForward, FreezeFiSand)
FiSandBwScript := stack(FiSandLayer, Sand_FiBoxBw, FreezeFiSand)
AC_FilterWaterTerminal := stack(FiInletChannelScript, FiTankScript, PlantDrainChannelScript, FiManifoldScript, FiAuxScript, FiSandDrainScript, FiSiphonScript, FiArrayScript, FiWeirScript, FiDistFinishScript, FiSiphonFinishScript, FiBoxDrainFinishScript, FiWaterTerminalScript, FiSandForwardScript)
AC_FilterWaterClean := stack(FiInletChannelScript, FiTankScript, PlantDrainChannelScript, FiManifoldScript, FiAuxScript, FiSandDrainScript, FiSiphonScript, FiArrayScript, FiWeirScript, FiDistFinishScript, FiSiphonFinishScript, FiBoxDrainFinishScript, FiWaterCleanScript, FiSandForwardScript)
AC_FilterWaterBw := stack(FiInletChannelScript, FiTankScript, PlantDrainChannelScript, FiManifoldScript, FiAuxScript, FiSandDrainScript, FiSiphonScript, FiArrayScript, FiWeirScript, FiDistFinishScript, FiSiphonFinishScript, FiBoxDrainFinishScript, FiWaterBwScript, FiSandBwScript)
AC_FilterWater :=
    AC_FilterWaterTerminal if EN_FilterWater == 0
    AC_FilterWaterClean if EN_FilterWater == 1
    AC_FilterWaterBw if EN_FilterWater == 2
AC_Filter := stack(FiInletChannelScript, FiTankScript, PlantDrainChannelScript, FiManifoldScript, FiAuxScript, FiSandDrainScript, FiSiphonScript, FiArrayScript, FiWeirScript, FiDistFinishScript, FiSiphonFinishScript, FiBoxDrainFinishScript)
AC_Filter :=
    AC_Filter if EN_Water == 0
    AC_FilterWater otherwise
