Q_Plant := 20*L/s
Mod := 0
# [reference: ExpertInputs.xmcd]
# [reference: MathFunctions.xmcd]
# [reference: PipeDatabase.xmcd]
# [reference: MaterialsDatabase.xmcd]
# [reference: FluidsFunctions.xmcd]
# [reference: SedTankFunctions.xmcd]
# [reference: CdcFunctions.xmcd]
# This value is defined in the Sed Tank Design File
# [reference: LfomFunctions.xmcd]
# [reference: SedimentationTank.xmcd]
HL_FiEntrancePipe = 0.0535645 m
# [reference: Flocculator.xmcd]
# [reference: LFOM.xmcd]
# [reference: EntranceTank.xmcd]
H_FiBwGate := 30 cm
# These things should NOT be in Expert Inputs!
H_FiBwFlowControl := 10 cm
# mrf222 copy
Q_Plant :=
    Q_Train if EN_DoubleTrain == 1
    Q_Plant otherwise
# Stacked Rapid Sand Filter
## Constraints and Comments (Not necessarily updated)
# Max head loss through inlet piping during filtration
# Max head loss through inlet piping during backwash
# Max head loss through outlet piping during filtration
# Max head loss through outlet piping during backwash (siphon)
# Max ratio of head loss in manifold to head loss through filter layer during filtration
# Max ratio of head loss in manifold to head loss through filter layer during filtration
# The head loss across each layer of the filter must be large compared to losses in the plumbing that distributes water into the sand bed, in order for the water to be distributed uniformly to each layer.  At the beginning of a filtration cycle when the sand bed is clean, the head loss is the smallest.  This minimum head loss during filtration is estimated by the Carman-Kozeny equation.
# Filtration mode constraints
# The inlet manifolds need to have a small piezometric head variation relative to the head loss through a clean sand bed. Given that both the trunk lines and the branches are short manifolds (fL/d < 1), the piezometric head variability is dominated by pressure recovery which is given by V^2/(2*g)*.  where the velocity is the initial velocity in the manifold. Thus the velocity in the trunk and branch lines is limited by this constraint. If we want to relax this constraint we could add head loss through the slots. But we need to be careful to not cause a flow imbalance between the inlets that carry flow for two layers and the inlets that carry flow for only one layer. Perhaps top inlet and bottom inlet should have only one line of slots per pipe instead of two lines. We are currently assuming that the backwash branches will have 1/2 the slot area of the branches in the other layers.
#
# Slot head loss issues
# If we use the slots to generate head loss in an effort to improve flow distribution, we need to account for sand blocking (1-ε) of the slots during filtration. The slots are not blocked during backwash (except perhaps during backwash initiation).
#
# Backwash mode constraints
# The  constraint on the design of the backwash manifold branches is that the flow rate from each slot must be close to the average (perhaps within 20%). We cannot rely on head loss through the filter media to help create uniform flow from the manifold during backwash because the filter bed will be fluidized. Thus we must design the backwash manifold to have uniform flow distribution without any external assistance. We can improve uniformity of flow distribution by decreasing head loss and pressure recovery in the manifold branches and in the trunk line and/or by increasing the head loss through the slots. The backwash system will also be used during filtration and the flow rate in the backwash manifold system will vary by a factor of 6 between those two states. Thus head loss through the slots will vary by a factor of 36 between the two states. We could use a relatively high slot head loss to get uniform flow distribution. The slot head loss must be small enough during filtration mode to not cause a flow inbalance between filter layers. That suggests that the slot head loss must be less than 10% of the clean bed head loss during filtration and thus less than 36 times that amount during backwash.
#
# Flow distribution in a short manifold is quite uniform for the case when the total port area is equal to or less than the manifold area. We have two manifold systems operating in series with trunk line distributing flow to branches and branches distributing flow to slots. Head loss through the slots effectively helps distribute flow between branches as well as between slots. Thus the constraints on both trunk and branch sizes are that they have pressure recovery terms that are small compared with the head loss through the slots.
# Algorithm for trunk, branch, slot design
# Head loss through the slots in the backwash manifold are directly related to the head loss throught the slots during filtration. The flow area during filtration will be reduced due to sand blocking. This results in a factor of ε_FiSand
# Calculate slot area for backwash assuming this head loss.
# Note that the slot area for backwash analysis should not be adjusted for sand porosity.
# Calculate size of branch lines using the rule that their area must exceed the port area.
# Given the area of the branch lines, recalculate the slot area by setting it equal to the branch area.
# Recalculate the actual head loss through the slots given this new slot area.
#
# Calculate the size of the trunk lines using the rule that their area must exceed the port area. Thus branches must have more area than the slots in a branch. Trunk must have more area than the branches.
# Top View
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# Layer Thickness as Function of Trunk Diameter
# round up to the nearest cm to make construction easier
H_FiLayerF(ND_Trunk) := max(H_FiLayerMin, Ceil(outerdiameter(ND_Trunk) + S_FiTrunkMin, 1 cm), Ceil(OuterDiameterFittingPVC(ND_Trunk), 1 cm), Ceil(FerncoOuterDiameter(ND_Trunk), 1 cm))
H_FiBottomLayerF(ND_Trunk, ND_BwTrunk) := max(H_FiLayerMin, Ceil(outerradius(ND_Trunk) + outerradius(ND_BwTrunk) + S_FiTrunkMin, 1 cm), Ceil(ConRadius(ND_Trunk) + ConRadius(ND_BwTrunk), 1 cm), Ceil(FerncoOuterDiameter(ND_Trunk)/2 + FerncoOuterDiameter(ND_BwTrunk)/2, 1 cm))
# Flow Distribution Constraints: Ratio of Pressure Recovery to Clean Bed Head Loss
# There are three flow distribution problems in the filter design: distribution between the slots along a manifold branch, distribution between branches along a trunk, and distribution between filter layers. The first two are both addressed by making pressure recovery in the manifold (both trunks and branches) small relative to the short path head loss (head loss through the clean bed, since slot head loss in forward filtration is small). In backwash mode where there is no bed head loss, the pressure recovery in the manifold plumbing must be small relative to slot head loss.
#
# Head loss through the inlet and outlet plumbing differs for different layers both because the number of elbows varies and because the top and bottom inlets have 1/2 the flow of the middle two. Therefore good flow distribution between layers would be addressed by making head loss through the inlet and outlet plumbing small for all layers relative to clean bed head loss. We do not have an explicit constraint set for this, but the constraint on trunk diameter which gives good flow distribution within the manifolds seems to be sufficient to take care of it. As a check, see the analysis under the section "Path Head Loss Calculations and Flow Distribution Between Layers" below.
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Pi_FiManifoldQ := 0.85  # Ratio of long path flow to short path flow
Pi_FiManifoldHeadLoss := 1 - Pi_FiManifoldQ^2 = 0.2775
# Ratio of pressure recovery in the slotted pipes to the head loss through the clean bed (or through the slots in backwash mode)
# Even though the piezometric head profiles for the inlet and outlet manifolds on the middle layers may be parallel meaning that pressure recovery there need not be small for good distribution between sand bed flow paths, we still need pressure recovery to be small in the outlet manifolds in order to get good flow distribution in the top and bottom layers where the velocity in the manifolds is 1/2 and the pressure recovery 1/4 that of other layers (even smaller in the larger-diameter bottom manifold where velocity head is tiny).
# Numbers of Filters, Trunk Diameter and Layer Thickness Based on Flow Distribution Constraint
Q_FilterMax :=
    for i ∈ 0 .. last(AvailND)
        H_FiLayer ← H_FiLayerF(AvailND[i])
        HL_FiCleanLayer ← h_lKozeny(H_FiLayer, D_FiSand60, V_FiLayer, ε_FiSand, Nu_Water)
        V_FiTrunkMaxPR ← sqrt(2*g*HL_FiCleanLayer*Pi_FiManifoldHeadLoss)
        Q_FilterMax[i] ← π*innerdiameter(AvailND[i], PS_Default)^2/4*V_FiTrunkMaxPR*N_FiLayer/2
    return Q_FilterMax
# This function returns the maximum flow rate through a filter for each of the available trunk pipe sizes based on the manifold flow distribution constraint.
N_Fi := ceil(Q_Plant/LookupCeil(ND_FiTrunkMax, AvailND, Q_FilterMax)) = 1
# We will have one filter up until the plant flow is the maximum for a 6 inch trunk, after which we will multiply the filter as needed
ND_FiTrunk := LookupCeil(Q_Plant/N_Fi, Q_FilterMax, AvailND) = 6 in
H_FiLayer := H_FiLayerF(ND_FiTrunk) = 20 cm
# Clean Bed Head Loss and Maximum Manifold Velocity
# Filtration manifold maximum velocity
HL_FiCleanLayer := h_lKozeny(H_FiLayer, D_FiSand60, V_FiLayer, ε_FiSand, Nu_Water) = 5.56209 cm
PR_FiManifoldMax := HL_FiCleanLayer*Pi_FiManifoldHeadLoss
V_FiManMaxPR := sqrt(2*g*PR_FiManifoldMax) = 0.550207 m/s
# Backwash manifold maximum velocity
HL_FiBwSlotsEst := 5 cm
PR_FiBwManifoldMax := HL_FiBwSlotsEst*Pi_FiManifoldHeadLoss
V_FiBwManMaxPR := sqrt(2*g*PR_FiBwManifoldMax) = 0.521665 m/s
# Number of Filters, Flow Rate Calculations, and Backwash Trunk Diameter
Q_FiMax := LookupCeil(ND_FiTrunk, AvailND, Q_FilterMax) = 30.9485 L/s
Q_Fi := Q_Plant/N_Fi = 20 L/s  # The flow will be divided evenly between the N_Fi = 1 filters.
A_FiActive := Q_Fi/(N_FiLayer*V_FiLayer) = 1.81818 m^2  # This is the required area of each of the N_Fi = 1 filters.
Q_FiLayer := Q_Fi/N_FiLayer = 3.33333 L/s  # This is the flow rate through each filter layer
ND_FiBwTrunk := NominalDiameter(CeilNearest(D_circle(Q_Fi/V_FiBwManMaxPR), AvailPipeSizes(PS_Default)[:, 0]), PS_Default) = 10 in
# Auxilliary Box Plan Dimensions and Plumbing
# Plumbing
HL_FiBoxDrainMax := 1.5 m
ND_FiExitWaste := NominalPipeSize(D_PipeTotal(Q_Fi, HL_FiBoxDrainMax, 1 m, Nu_Water, E_Pvc, K_PipeEnt + K_El90 + K_PipeExit)) = 4 in
ND_FiEntOverflow := NominalPipeSize(D_PipeTotal(1.5*Q_Fi, HL_FiBoxDrainMax, 1 m, Nu_Water, E_Pvc, K_PipeEnt + K_El90 + K_PipeExit)) = 6 in
ND_FiBypass := NominalPipeSize(D_PipeTotal(1.5*Q_Fi, 20 cm, 0.5 m, Nu_Water, E_Pvc, K_PipeEnt + K_El90 + K_PipeExit)) = 8 in
ND_DistPipe := D_pipeschedule(Q_Plant, PS_Default, HL_FiBoxDrainMax, 100 m, Nu_Water, E_Pvc, K_PipeEnt + 3*K_El90 + K_PipeExit) = 6 in
HL_FiExitWaste := h_l(Q_Fi, innerdiameter(ND_FiExitWaste, PS_Default), 1 m, K_PipeEnt + K_El90 + K_PipeExit, Nu_Water, E_Pvc) = 0.708459 m
HL_FiEntOverflow := h_l(1.5*Q_Fi, innerdiameter(ND_FiEntOverflow, PS_Default), 1 m, K_PipeEnt + K_El90 + K_PipeExit, Nu_Water, E_Pvc) = 0.330149 m
HL_FiBypass := h_l(1.5*Q_Fi, innerdiameter(ND_FiBypass, PS_Default), 0.5 m, K_PipeEnt + K_El90 + K_PipeExit, Nu_Water, E_Pvc) = 0.111161 m
HL_DistPipe := h_l(Q_Plant, innerdiameter(ND_DistPipe, PS_Default), 100 m, K_PipeEnt + 3*K_El90 + K_PipeExit, Nu_Water, E_Pvc) = 1.01555 m
H_FiEntOverflowDrop := max(HL_FiEntOverflow + H_DrainOutletSafety, CouplingLength(ND_FiEntOverflow) + SocketDepth(ND_FiEntOverflow) + ElbowRadius(ND_FiEntOverflow)) = 0.44435 m
H_FiExitWasteDrop := max(HL_FiExitWaste + H_DrainOutletSafety, CouplingLength(ND_FiExitWaste) + SocketDepth(ND_FiExitWaste) + ElbowRadius(ND_FiExitWaste)) = 0.808459 m
H_FiDistDrop := max(HL_DistPipe + H_DrainOutletSafety, max(CouplingLength(ND_DistPipe), T_PlantWall) + SocketDepth(ND_DistPipe) + ElbowRadius(ND_DistPipe)) = 1.11555 m
# The combined width of the overflow/distribution and entrance/exit boxes must match the filter width so that the boxes fit when adjacent filters are put side-by-side
W_FiEntrance := max(3*S_Fitting + ConRadius(ND_FiBwTrunk) + 3*ConRadius(ND_FiTrunk) + 2*(SocketDepth(ND_FiTrunk) + ElbowRadius(ND_FiTrunk)), W_HumanMin, W_rectweir(Q_Fi, 5 cm)) = 1.14744 m
W_FiOverflowMin := OuterDiameterFittingPVC(ND_DistPipe) + 2*S_Fitting = 0.28415 m
# The actual width of the overflow/distribution boxes will be defined once the actual filter width is determined based on the number of manifold branches.
W_FiMin := W_FiEntrance + W_FiOverflowMin + T_PlantWall + T_ChannelWall - T_FiWall = 1.48159 m
# For one filter make the dimensions closer to square
W_FiActiveMin := W_FiMin - outerdiameter(ND_FiBwTrunk) = 1.20854 m
W_FiSingleEst := (outerdiameter(ND_FiTrunk) + sqrt(outerdiameter(ND_FiTrunk)^2 + 4*A_FiActive))/2 = 1.43516 m
L_FiSingleEst := W_FiSingleEst
# Entrance and Overflow Weirs
L_FiEntranceWeir := W_FiEntrance = 1.14744 m
HL_FiEntranceWeir := Headloss_weir(Q_Fi, L_FiEntranceWeir) = 4.44477 cm
L_FiOverflowWeir := 2*ConRadius(ND_FiBwTrunk) + 2*ConRadius(ND_FiTrunk) + 3*S_Fitting
HL_FiOverflowWeir := Headloss_weir(Q_Fi, L_FiOverflowWeir) = 6.59971 cm
# Entrance and Exit Box Length
# Space between the entrance box wall and the baffle
S_FiEntranceBaffle := ((Q_Fi/T_ChannelWall)^2/g)^(1/3)
S_FiBaffleToBlock := ((Q_Fi/T_ChannelWall)^2/g)^(1/3)
W_FiAirRemovalBlock := T_SedWeir  # make this a generic weir thickness at some point?
L_FiEntrance := L_FiOverflowWeir + S_FiEntranceBaffle + S_FiBaffleToBlock + 2*T_SedWeir + T_ConcreteMin
L_FiExit := max(3*S_Fitting + 2*OuterDiameterFittingPVC(ND_FiTrunk), W_HumanMin) = 0.5183 m
L_FiOverflow := L_FiEntrance
# Walkway Between the Filter Boxes and Exit Boxes:
W_MpWalkway := max(W_MpWalkwayMin, ShortTeeLength(ND_DistPipe) + ConRadius(ND_DistPipe) + S_Fitting + ConRadius(ND_DistPipe) + ElbowRadius(ND_DistPipe) + 2*SocketDepth(ND_DistPipe) + ElbowRadius(ND_DistPipe) - L_FiExit/2 - T_PlantWall) = 1 m
# Number of Manifold Branches
Q_FiManBranchMaxPR := V_FiManMaxPR*π*innerdiameter(ND_FiManBranch, PS_FiBranch)^2/4 = 0.306785 L/s
Q_FiManBranchAveMaxPR := Q_FiManBranchMaxPR/(1 + (1 - Pi_FiManifoldQ)/2) = 0.285381 L/s
# branches are coming out of both sides of the manifold
N_FiManBranchMin := Ceil(Q_FiLayer/Q_FiManBranchAveMaxPR, 2) = 12
# Maximum number of manifold branches which allows the filter box width to match the auxiliary box width (only relevant for more than one filter):
N_FiManBranchMaxMult := Floor(2*(Q_FiLayer/(W_FiActiveMin*V_FiLayer*B_FiManifoldBranch) - (outerradius(ND_FiBwManBranch) + L_FiManFerncoCoupling + OuterDiameterFittingPVC(ND_FiSandOutlet))/B_FiManifoldBranch) + 1, 2) = 28
N_FiManBranchSquare := Round(2*(L_FiSingleEst - OuterDiameterFittingPVC(ND_FiSandOutlet) - L_FiManFerncoCoupling + (B_FiManifoldBranch/2 - outerradius(ND_FiBwManBranch)))/B_FiManifoldBranch, 2) = 28
N_FiManBranch :=
    N_FiManBranchSquare if N_Fi == 1
    N_FiManBranchMaxMult otherwise
    = 28
Q_FiManBranch := Q_FiLayer/N_FiManBranch = 0.119048 L/s
N_ManifoldFeetSets := 4
# This variable needs to be calculated as a function of the length of the manifold and the flow rate probably
# added by mrf222 7/23/14
# Filter Box Dimensions and Manifold Pipe Lengths
# This is only the active filtration width (does not include the projected area of the trunk lines, but we assume the space between the branch holders and beyond contributes to active area)
W_FiActive := Q_FiLayer/V_FiLayer*1/((N_FiManBranch - 1)/2*B_FiManifoldBranch + L_FiManFerncoCoupling + OuterDiameterFittingPVC(ND_FiSandOutlet) + outerradius(ND_FiBwManBranch)) = 1.22652 m
W_Fi := W_FiActive + outerdiameter(ND_FiBwTrunk) = 1.49957 m
W_FiOverflow :=
    (W_Fi + T_FiWall - W_FiEntrance - 2*T_PlantWall) if N_Fi > 1
    W_FiOverflowMin otherwise
L_Fi := (N_FiManBranch - 1)/2*B_FiManifoldBranch + L_FiManFerncoCoupling + outerradius(ND_FiBwManBranch) + OuterDiameterFittingPVC(ND_FiSandOutlet) = 1.48239 m
L_FiManBranch := W_Fi/2 - outerradius(ND_FiTrunk) - ConRadius(ND_FiBwBranchHolder) - outerradius(ND_FiBranchHolder) + 2*L_FiManBranchExt - S_FiManAssembly = 63.1353 cm
L_FiManBranchTot := L_FiManBranch*N_FiManBranch
L_FiBwManBranch := W_Fi/2 - outerradius(ND_FiBwTrunk) - ConRadius(ND_FiBwBranchHolder) - outerradius(ND_FiBwBranchHolder) + 2*L_FiManBranchExt - S_FiManAssembly = 57.8965 cm
L_FiBwManBranchTot := L_FiBwManBranch*N_FiManBranch
L_FiTrunk := L_Fi - L_FiManFerncoCoupling/2 - CapThickness(ND_FiTrunk) - S_FiManAssembly
L_FiBwTrunk := L_Fi - L_FiManFerncoCoupling/2 - CapThickness(ND_FiBwTrunk) - S_FiManAssembly
L_FiBranchHolder := L_Fi - 2*CapThickness(ND_FiBranchHolder) - 2*S_FiManAssembly
L_FiBwBranchHolder := L_Fi - 2*CapThickness(ND_FiBwBranchHolder) - 2*S_FiManAssembly
# Backwash Manifold Design and Slot Area
# We select  B_FiBwManSlot := 3/16*in = 4.7625 mm  for the closest slot spacing, and N_FiBwSlotRows := 1  for best structural integrity of these pipes
# We select  B_FiManSlot := 3/16*in = 4.7625 mm  for the closest slot spacing, and N_FiSlotRows := 2  for best structural integrity of these pipes
Q_FiBwManBranch := Q_Fi/N_FiManBranch = 0.714286 L/s
PR_FiBwManBranch := (Q_FiBwManBranch/(π*innerdiameter(ND_FiBwManBranch, PS_FiBranch)^2/4))^2/(2*g) = 1.50791 cm
HL_FiBwSlot := PR_FiBwManBranch/Pi_FiManifoldHeadLoss = 5.43391 cm
A_FiManSlots := 2*A_orifice(HL_FiBwSlot, Pi_VenaContractaOrifice, Q_Fi) = 0.0615018 m^2
L_FiManSlotBranchTotal := A_FiManSlots/W_FiManSlots
N_FiManSlotsPerRow := floor((L_FiManBranchTot - (2*L_FiManBranchExt + B_FiManSlot)*N_FiManBranch)/B_FiManSlot)
N_FiManSlotsPerTrunk := N_FiManSlotsPerRow*N_FiSlotRows
L_FiManSlotCurvedInner := L_FiManSlotBranchTotal/N_FiManSlotsPerTrunk
C_FiManInner := π*innerdiameter(ND_FiManBranch, PS_FiBranch)
Pi_SlotCirc := L_FiManSlotCurvedInner/C_FiManInner = 0.524334
HL_FiBwSlotCheck :=
    while Pi_SlotCirc > 0.4
        HL_FiBwSlot ← HL_FiBwSlot + 0.05 cm
        A_FiManSlots ← 2*A_orifice(HL_FiBwSlot, Pi_VenaContractaOrifice, Q_Fi)
        L_FiManSlotBranchTotal ← A_FiManSlots/W_FiManSlots
        N_FiManSlotsPerRow ← floor((L_FiManBranchTot - (2*L_FiManBranchExt + B_FiManSlot)*N_FiManBranch)/B_FiManSlot)
        N_FiManSlotsPerTrunk ← N_FiManSlotsPerRow*N_FiSlotRows
        L_FiManSlotCurvedInner ← L_FiManSlotBranchTotal/N_FiManSlotsPerTrunk
        C_FiManInner ← π*innerdiameter(ND_FiManBranch, PS_FiBranch)
        Pi_SlotCirc ← L_FiManSlotCurvedInner/C_FiManInner
    return HL_FiBwSlot
# Drew's Comment:
# The slot areas are based on head loss through the slots of the bottom manifold during backwash. During backwash the sand is fluidized and the slots are the only head loss element common to all paths that helps us with flow distribution along the length of the manifold. So that area is calculated based on an allowable difference between short path flow rate and long path flow rate, the function is defined in one of the first sections of the file. The other slot areas are then based on the backwash slot area so that slot head loss through all paths is equal during forward filtration.
HL_FiBwSlot := HL_FiBwSlotCheck = 0.0938391 m
A_FiBwManSlots := A_orifice(HL_FiBwSlot, Pi_VenaContractaOrifice, Q_Fi) = 0.0234003 m^2
HL_FiBwSlotForward := h_orifice(D_circle(A_FiBwManSlots*ε_FiSand), Pi_VenaContractaOrifice, Q_FiLayer) = 1.62915 cm
# Check that head loss through the backwash slots is small in filtration mode (we want good flow distribution between layers, so the bottom layer should not have significantly more slot head loss)
# Monroe's comment
# If the backwash slot area is 1/2 the slot area of the middle two inlets, then the constraint/check mentioned above isn't needed. This is the currently being followed in the code.
# If the backwash slot area is the same as the middle two inlets, then the difference in head loss between the bottom inlet slots and the middle inlet slots during filtration should be small compared with the total head loss through the filter.
A_FiBwManBranches := N_FiManBranch*π*innerdiameter(ND_FiBwManBranch, PS_FiBranch)^2/4 = 367.762 cm^2
Pi_FiBwManArea := A_FiBwManBranches/A_FiBwManSlots = 1.57161  # This is not used, just a check
# Drews comment:
# The slot area for the backwash inlet manifold (1 1/2" pipes) is 1/2 that of the middle two manifolds. Likewise, the slot area of the top inlet manifold should be 1/2 that of the middle two as it should also receive half of the flow during forward filtration. This doesn't appear in the design file but it should because it will ultimately go in the design specifications document that the design tool will produce.
# Inner manifolds have double the slot area of the upper and lower manifolds
A_FiManSlots := 2*A_FiBwManSlots = 468.007 cm^2
HL_FiSlot := (2*Q_FiLayer/(Pi_VenaContractaOrifice*A_FiManSlots*ε_FiSand))^2*1/(2*g) = 1.62915 cm
# A conservative estimate of the head loss through the slots of the normal inlet manifold given sand blockage
# Bottom Layer Thickness, Total Sand Depth, and Backwash Head Loss
H_FiBottomLayer := H_FiBottomLayerF(ND_FiTrunk, ND_FiBwTrunk) = 26 cm
HL_FiCleanBottomLayer := h_lKozeny(H_FiBottomLayer, D_FiSand60, V_FiLayer, ε_FiSand, Nu_Water) = 7.23071 cm
H_FiSand := (N_FiLayer - 1)*H_FiLayer + H_FiBottomLayer + outerradius(ND_FiBwManBranch) + outerradius(ND_FiManBranch) = 1.30083 m
H_FiSandActive := H_FiSand - outerradius(ND_FiBwManBranch) - outerradius(ND_FiManBranch) = 1.26 m
H_FiFluidizedBed := Pi_FiFluidized*H_FiSand = 1.69108 m
HL_FiBwSS := H_FiSand*(Rho_FiSand - Rho_H2O)*(1 - ε_FiSand)/Rho_H2O = 1.28782 m  # Sand bed head loss during steady state backwash.
# The backwash head loss is almost exactly equal  to the sand bed depth. Note that this ignores losses in the plumbing.
HL_FiDirty := 40 cm  # Mickey suggested this value based on lab experience
HL_FiTerminal := HL_FiCleanLayer + HL_FiDirty = 45.5621 cm
HL_FiBwInitiation := HL_FiBwSF + HL_FiBwSS = 1.48782 m
# How much does the filter bed over fluidize when the entrance box level lowers after backwash initiation?
H_FiFluidizedBedVariation := (HL_FiBwInitiation - HL_FiBwSS)*(W_FiEntrance*L_FiEntrance - 3*π*outerradius(ND_FiTrunk)^2 - π*outerradius(ND_FiBwTrunk)^2)/A_FiActive = 11.3455 cm
# Plumbing Head Loss
HL_FiBwInletManifold := 1/3*h_f(Q_Fi, innerD(ND_FiBwTrunk, PS_Default), L_Fi, Nu_Water, E_Pvc) + h_e(Q_Fi/N_FiManBranch, innerD(ND_FiBwManBranch, PS_FiBranch), K_PipeEnt) + 1/3*h_f(Q_Fi/N_FiManBranch, innerD(ND_FiBwManBranch, PS_FiBranch), W_FiActive, Nu_Water, E_Pvc) + HL_FiBwSlot = 10.6434 cm
HL_FiInletManifold(Q_Layer) := 1/3*h_f(2*Q_Layer, innerD(ND_FiTrunk, PS_Default), L_Fi, Nu_Water, E_Pvc) + h_e(2*Q_Layer/N_FiManBranch, innerD(ND_FiManBranch, PS_FiBranch), K_PipeEnt) + 1/3*h_f(2*Q_Layer/N_FiManBranch, innerD(ND_FiManBranch, PS_FiBranch), L_FiManBranch, Nu_Water, E_Pvc) + HL_FiSlot
HL_FiInletManifoldTop(Q_Layer) := 1/3*h_f(Q_Layer, innerD(ND_FiTrunk, PS_Default), L_Fi, Nu_Water, E_Pvc) + h_e(Q_Layer/N_FiManBranch, innerD(ND_FiManBranch, PS_FiBranch), K_PipeEnt) + 1/3*h_f(Q_Layer/N_FiManBranch, innerD(ND_FiManBranch, PS_FiBranch), L_FiManBranch, Nu_Water, E_Pvc) + HL_FiSlot
HL_FiInletManifoldBottom(Q_Layer) := 1/3*h_f(Q_Layer, innerD(ND_FiBwTrunk, PS_Default), L_Fi, Nu_Water, E_Pvc) + h_e(Q_Layer/N_FiManBranch, innerD(ND_FiBwManBranch, PS_FiBranch), K_PipeEnt) + 1/3*h_f(Q_Layer/N_FiManBranch, innerD(ND_FiBwManBranch, PS_FiBranch), L_FiManBranch, Nu_Water, E_Pvc) + HL_FiSlot
HL_FiOutletManifold(Q_Layer) := 1/3*h_f(2*Q_Layer, innerD(ND_FiTrunk, PS_Default), L_Fi, Nu_Water, E_Pvc) + h_e(2*Q_Layer/N_FiManBranch, innerD(ND_FiManBranch, PS_FiBranch), K_PipeExit) + 1/3*h_f(2*Q_Layer/N_FiManBranch, innerD(ND_FiManBranch, PS_FiBranch), L_FiManBranch, Nu_Water, E_Pvc)
# For the head loss through the outlet manifold:
# Does it make sense to have a pipe exit loss included?
# Also, is it worth coming up with an estimate for head loss through the slots entering the branch?
HL_FiOutletStubs(Q_Layer) := Headloss_weir(Q_Layer, innerdiameter(ND_FiTrunk, PS_Default))
HL_FiInletPlumbing1(Q_Layer) := h_l(Q_Layer, innerD(ND_FiTrunk, PS_Default), 3 m, 3*K_El90 + K_PipeEnt, Nu_Water, E_Pvc) + HL_FiInletManifoldTop(Q_Layer)
HL_FiInletPlumbing2(Q_Layer) := h_l(2*Q_Layer, innerD(ND_FiTrunk, PS_Default), 3 m, 3*K_El90 + K_PipeEnt, Nu_Water, E_Pvc) + HL_FiInletManifold(Q_Layer)
HL_FiInletPlumbing3(Q_Layer) := h_l(2*Q_Layer, innerD(ND_FiTrunk, PS_Default), 3 m, K_El90 + K_PipeEnt, Nu_Water, E_Pvc) + HL_FiInletManifold(Q_Layer)
# These are numbered from the top of the filter bed down. The top and bottom inlets have half the flow rate (only serve the layers below and above, respectively). The bottom inlet has the diameter of the backwash trunk.
HL_FiInletPlumbing4(Q_Layer) := h_l(Q_Layer, innerD(ND_FiBwTrunk, PS_Default), 3 m, K_El90 + K_PipeEnt, Nu_Water, E_Pvc) + HL_FiInletManifoldBottom(Q_Layer)
HL_FiInletPlumbingMax(Q_1, Q_2, Q_3, Q_4) := max(HL_FiInletPlumbing1(Q_1), HL_FiInletPlumbing2(Q_2), HL_FiInletPlumbing3(Q_3), HL_FiInletPlumbing4(Q_4))
HL_FiInletPlumbingMin(Q_1, Q_2, Q_3, Q_4) := min(HL_FiInletPlumbing1(Q_1), HL_FiInletPlumbing2(Q_2), HL_FiInletPlumbing3(Q_3), HL_FiInletPlumbing4(Q_4))
HL_FiInletPlumbingAve(Q_1, Q_2, Q_3, Q_4) := (HL_FiInletPlumbing1(Q_1) + HL_FiInletPlumbing2(Q_2) + HL_FiInletPlumbing3(Q_3) + HL_FiInletPlumbing4(Q_4))/4
HL_FiBwInletPlumbing := h_l(Q_Fi, innerD(ND_FiBwTrunk, PS_Default), 3 m, K_El90 + K_PipeEnt, Nu_Water, E_Pvc) + HL_FiBwInletManifold = 12.016 cm
HL_FiOutletPlumbing1(Q_Layer) := h_l(2*Q_Layer, innerD(ND_FiTrunk, PS_Default), 3 m, K_El90 + K_PipeExit, Nu_Water, E_Pvc) + HL_FiOutletManifold(Q_Layer) + HL_FiOutletStubs(Q_Layer)
HL_FiOutletPlumbing2(Q_Layer) := HL_FiOutletPlumbing1(Q_Layer)
HL_FiOutletPlumbing3(Q_Layer) := h_l(2*Q_Layer, innerD(ND_FiTrunk, PS_Default), 3 m, 2*K_El90 + K_PipeExit, Nu_Water, E_Pvc) + HL_FiOutletManifold(Q_Layer) + HL_FiOutletStubs(Q_Layer)
HL_FiOutletPlumbingMax(Q_1, Q_3) := max(HL_FiOutletPlumbing1(Q_1), HL_FiOutletPlumbing2(Q_1), HL_FiOutletPlumbing3(Q_3))
HL_FiOutletPlumbingMin(Q_1, Q_3) := min(HL_FiOutletPlumbing1(Q_1), HL_FiOutletPlumbing2(Q_1), HL_FiOutletPlumbing3(Q_3))
HL_FiOutletPlumbingAve(Q_1, Q_3) := (HL_FiOutletPlumbing1(Q_1) + HL_FiOutletPlumbing2(Q_1) + HL_FiOutletPlumbing3(Q_3))/3
# Path Head Loss Calculations and Flow Distribution Between Layers
HL_FiCleanLyr(Q) := h_lKozeny(H_FiLayer, D_FiSand60, Q/A_FiActive, ε_FiSand, Nu_Water)
HL_FiCleanBottomLyr(Q) := h_lKozeny(H_FiBottomLayer, D_FiSand60, Q/A_FiActive, ε_FiSand, Nu_Water)
HL_FiPathClean1(Q_Path) := HL_FiInletPlumbing1(Q_Path) + HL_FiCleanLyr(Q_Path) + HL_FiOutletPlumbing1(Q_Path)
HL_FiPathClean2(Q_Path) := HL_FiInletPlumbing2(Q_Path) + HL_FiCleanLyr(Q_Path) + HL_FiOutletPlumbing1(Q_Path)
HL_FiPathClean3(Q_Path) := HL_FiInletPlumbing2(Q_Path) + HL_FiCleanLyr(Q_Path) + HL_FiOutletPlumbing2(Q_Path)
HL_FiPathClean4(Q_Path) := HL_FiInletPlumbing3(Q_Path) + HL_FiCleanLyr(Q_Path) + HL_FiOutletPlumbing2(Q_Path)
HL_FiPathClean5(Q_Path) := HL_FiInletPlumbing3(Q_Path) + HL_FiCleanLyr(Q_Path) + HL_FiOutletPlumbing3(Q_Path)
HL_FiPathClean6(Q_Path) := HL_FiInletPlumbing4(Q_Path) + HL_FiCleanBottomLyr(Q_Path) + HL_FiOutletPlumbing3(Q_Path)
HL_FiPathCleanMax(Q_1, Q_2, Q_3, Q_4, Q_5, Q_6) := max(HL_FiPathClean1(Q_1), HL_FiPathClean2(Q_2), HL_FiPathClean3(Q_3), HL_FiPathClean4(Q_4), HL_FiPathClean5(Q_5), HL_FiPathClean6(Q_6))
HL_FiPathCleanMin(Q_1, Q_2, Q_3, Q_4, Q_5, Q_6) := min(HL_FiPathClean1(Q_1), HL_FiPathClean2(Q_2), HL_FiPathClean3(Q_3), HL_FiPathClean4(Q_4), HL_FiPathClean5(Q_5), HL_FiPathClean6(Q_6))
# In reality the flow will distribute itself such that all paths have the same head loss. We will treat the average of all of the calculated path head losses as the actual complete head loss accross all paths.
HL_FiPathCleanAve(Q_1, Q_2, Q_3, Q_4, Q_5, Q_6) := (HL_FiPathClean1(Q_1) + HL_FiPathClean2(Q_2) + HL_FiPathClean3(Q_3) + HL_FiPathClean4(Q_4) + HL_FiPathClean5(Q_5) + HL_FiPathClean6(Q_6))/6
Pi_QFiLayer(Q_1, Q_2, Q_3, Q_4, Q_5, Q_6) := sqrt(HL_FiPathCleanMin(Q_1, Q_2, Q_3, Q_4, Q_5, Q_6)/HL_FiPathCleanMax(Q_1, Q_2, Q_3, Q_4, Q_5, Q_6))
# This estimate is reasonable as long as the answer is close to 1
# Guess:
Q_2 := Q_FiLayer
Q_3 := Q_FiLayer
Q_4 := Q_FiLayer
Q_5 := Q_FiLayer
Q_6 := Q_FiLayer
Q_1 := Q_FiLayer
Given
HL_FiPathClean1(Q_1) == HL_FiPathClean2(Q_2)
HL_FiPathClean2(Q_2) == HL_FiPathClean3(Q_3)
Q_1 + Q_2 + Q_3 + Q_4 + Q_5 + Q_6 == Q_Fi
HL_FiPathClean3(Q_3) == HL_FiPathClean4(Q_4)
HL_FiPathClean4(Q_4) == HL_FiPathClean5(Q_5)
HL_FiPathClean5(Q_5) == HL_FiPathClean6(Q_6)
HL_FiPath(Q) := Find(Q_1, Q_2, Q_3, Q_4, Q_5, Q_6)
Q_FiLayer = 0.00333333 m^3/s
Q_FiPath := HL_FiPath(Q_Fi) = [3.63202; 3.1898; 3.1898; 3.38472; 3.28215; 3.32151] L/s
Q_FiLayer1 := Q_FiPath[0]
Q_FiLayer2 := Q_FiPath[1]
HL_FiPathClean1(Q_FiPath[0]) = 0.173381 m
Q_FiLayer3 := Q_FiPath[2]
HL_FiPathClean2(Q_FiPath[1]) = 0.173381 m
Q_FiLayer4 := Q_FiPath[3]
HL_FiPathClean3(Q_FiPath[2]) = 0.173381 m
HL_FiCleanPath := HL_FiPathClean1(Q_FiPath[0])
Q_FiLayer5 := Q_FiPath[4]
HL_FiPathClean4(Q_FiPath[3]) = 0.173381 m
Q_FiLayer6 := Q_FiPath[5]
HL_FiPathClean5(Q_FiPath[4]) = 0.173381 m
HL_FiPathClean6(Q_FiPath[5]) = 0.173381 m
# Slotted Pipe Design
A_FiBwBranchSlots := A_FiBwManSlots/N_FiManBranch = 8.35727 cm^2
# The slots should be configured to provide this total amount of slot area for the
# bottom manifold handling the backwash flow. We will define this as the inner diameter area of the slots
A_FiBranchSlots := A_FiManSlots/N_FiManBranch = 16.7145 cm^2  # This is the amount of slot area that must be available for each length of pipe.
L_FiBwManSlotBranchTotal := A_FiBwBranchSlots/W_FiManSlots = 4.11283 m  # The slots on each pipe must have this total length to provide the required area.
L_FiManSlotBranchTotal := A_FiBranchSlots/W_FiManSlots = 8.22566 m
W_FiManSlots = 0.008 in
N_FiBwManSlotsPerRow := floor((L_FiBwManBranch - 2*L_FiManBranchExt - B_FiBwManSlot)/B_FiBwManSlot) = 112
N_FiManSlotsPerRow := floor((L_FiManBranch - 2*L_FiManBranchExt - B_FiManSlot)/B_FiManSlot) = 123
N_FiManSlotsPerBranch := N_FiManSlotsPerRow*N_FiSlotRows = 246
N_FiBwManSlotsPerBranch := N_FiBwManSlotsPerRow*N_FiBwSlotRows = 112
C_FiBwManInner := π*innerdiameter(ND_FiBwManBranch, PS_FiBranch) = 5.05796 in
L_FiBwManSlotCurvedInner := L_FiBwManSlotBranchTotal/N_FiBwManSlotsPerBranch = 1.44574 in
C_FiManInner := π*innerdiameter(ND_FiManBranch, PS_FiBranch) = 3.29553 in
C_FiBwManOuter := π*outerdiameter(ND_FiBwManBranch) = 5.96903 in
L_FiManSlotCurvedInner := L_FiManSlotBranchTotal/N_FiManSlotsPerBranch = 1.31644 in
C_FiManOuter := π*outerdiameter(ND_FiManBranch) = 4.13119 in
L_FiBwManSlotInner := 2*innerdiameter(ND_FiBwManBranch, PS_FiBranch)/2*sin(2*π*L_FiBwManSlotCurvedInner/C_FiBwManInner/2) = 3.19818 cm
ND_FiBwManBranch = 1.5 in
Pi_FiBwSlotC := L_FiBwManSlotCurvedInner/C_FiBwManInner = 0.285833
ND_FiManBranch = 1 in
Pi_FiSlotC := L_FiManSlotCurvedInner/C_FiManInner = 0.399463
L_FiManSlotInner := 2*innerdiameter(ND_FiManBranch, PS_FiBranch)/2*sin(2*π*L_FiManSlotCurvedInner/C_FiManInner/2) = 2.53266 cm
outerdiameter(ND_FiManBranch) = 3.3401 cm
H_FiManCenterToSlot := sqrt((innerdiameter(ND_FiManBranch, PS_FiBranch)/2)^2 - (L_FiManSlotInner/2)^2) = 0.413819 cm
H_FiBwManCenterToSlot := sqrt((innerdiameter(ND_FiBwManBranch, PS_FiBranch)/2)^2 - (L_FiBwManSlotInner/2)^2) = 1.27425 cm
L_FiBwManSlotOuter := 2*sqrt(outerradius(ND_FiBwManBranch)^2 - H_FiBwManCenterToSlot^2) = 4.09822 cm
L_FiManSlotOuter := 2*sqrt(outerradius(ND_FiManBranch)^2 - H_FiManCenterToSlot^2) = 3.23594 cm
H_FiBwSlot := outerradius(ND_FiBwManBranch) - H_FiBwManCenterToSlot = 0.0113875 m
H_FiSlot := outerradius(ND_FiManBranch) - H_FiManCenterToSlot = 0.0125623 m
N_FiBwManBranchTotal := N_Fi*N_FiManBranch = 28
N_FiManBranchTotal := N_Fi*(N_FiLayer - 1)*N_FiManBranch = 140
# SPECIFICATIONS:  we need  N_FiBwManBranchTotal = 28 pipes of diameter  ND_FiBwManBranch = 1.5 in, with slots of width W_FiManSlots = 0.2032 mm, straight length L_FiBwManSlotOuter = 4.09822 cm  and a spacing of  B_FiBwManSlot = 0.1875 in
# SPECIFICATIONS:  we need  N_FiManBranchTotal = 140 pipes of diameter  ND_FiManBranch = 1 in  with slots of width  W_FiManSlots = 0.2032 mm,straight length L_FiManSlotOuter = 3.23594 cm, and a spacing of B_FiManSlot = 0.1875 in
P_FiBwManBranches := N_FiBwManBranchTotal*L_FiBwManBranch*(12*USD/(5 ft)) = 127.646 USD
P_FiManBranches := N_FiManBranchTotal*L_FiManBranch*(9*USD/(5 ft)) = 521.985 USD
# Siphon Design
L_FiSiphonEst := 2*(HL_FiBwInletPlumbing + HL_FiBwSS + HL_FiSiphonMax) + 2*(H_FiFluidizedBed + H_FiFluidizedBedToSiphon) + L_Fi/2 + T_FiWall + W_MpWalkway + 4*T_PlantWall + L_FiExit + L_FiEntrance + W_ChannelMin + W_DCWalkway/2 = 11.7657 m
K_FiSiphon := 5*K_El90 + K_PipeEnt + K_PipeExit = 6  # Minor loss coefficients for flow through the siphon. The tee is treated as an extra elbow
# Siphon has to handle the entire flow into the filter plus drain the terminal head in Ti.FiBwInitiation.  This is approximately a "hole in a bucket problem" so the average flow rate is half the max flow (hence the factor of 2).  The HL sum corresponds to the height of water that needs to be drained. Use maximum head loss through the siphon for conservative estimate.
Q_FiSiphonInitiation := Q_Fi + 2*A_FiActive*(HL_FiBwSF + H_FiForwardNoSuckAir + HL_FiDirty + HL_FiBwInletPlumbing + HL_FiBwSS + HL_FiSiphonMax - H_FiSiphonNoSuckAir)/Ti_FiBwInitiationBod = 64.6057 L/s
HL_FiSiphonMax := 30 cm
HL_FiSiphonInitiationMax := HL_FiBwSF + H_FiForwardNoSuckAir + HL_FiDirty + HL_FiBwInletPlumbing + HL_FiBwSS + HL_FiSiphonMax - H_FiSiphonNoSuckAir = 2.30798 m
ND_FiSiphonSS :=
    i ← 5
    HL_SiphonEst ← 10 m
    while HL_SiphonEst > HL_FiSiphonMax
        i ← i + 1
        ID_Siphon ← innerdiameter(AvailND[i], PS_Default)
        HL_SiphonPipeEst ← h_l(Q_Fi, ID_Siphon, L_FiSiphonEst, K_FiSiphon, Nu_Water, E_Pvc)
        HL_SiphonOutlet ← Headloss_weir(Q_Fi, ID_Siphon)
        HL_SiphonOrifice ← h_orifice(ID_Siphon, Pi_VenaContractaOrifice, Q_Fi)
        HL_SiphonEst ← HL_SiphonPipeEst + HL_SiphonOutlet + HL_SiphonOrifice
    return AvailND[i]
# these two functions must be changed if the available pipes are changed in the pipe database!!!!
ND_FiSiphonInitiation :=
    i ← 5
    HL_SiphonEst ← 10 m
    while HL_SiphonEst > HL_FiSiphonInitiationMax
        i ← i + 1
        ID_Siphon ← innerdiameter(AvailND[i], PS_Default)
        HL_SiphonPipeEst ← h_l(Q_FiSiphonInitiation, ID_Siphon, L_FiSiphonEst, K_FiSiphon, Nu_Water, E_Pvc)
        HL_SiphonOutlet ← Headloss_weir(Q_FiSiphonInitiation, ID_Siphon)
        HL_SiphonOrifice ← h_orifice(ID_Siphon, Pi_VenaContractaOrifice, Q_FiSiphonInitiation)
        HL_SiphonEst ← HL_SiphonPipeEst + HL_SiphonOutlet + HL_SiphonOrifice
    return AvailND[i]
ND_FiSiphon := max(ND_FiSiphonSS, ND_FiSiphonInitiation) = 10 in
HL_FiSiphonPipe := h_l(Q_Fi, innerdiameter(ND_FiSiphon, PS_Default), L_FiSiphonEst, K_FiSiphon, Nu_Water, E_Pvc) = 5.80894 cm
HL_FiSiphonOutlet := Headloss_weir(Q_Fi, innerD(ND_FiSiphon, PS_Default)) = 12.2495 cm
B_FiSiphonManOrificesEst := 10 cm
N_FiSiphonManOrifices := 2*floor((L_Fi - 2*ConRadius(ND_FiSiphon))/(2*B_FiSiphonManOrificesEst)) = 10
D_FiSiphonManOrifices := CeilNearest(innerdiameter(ND_FiSiphon, PS_Default)/sqrt(N_FiSiphonManOrifices), D_Drill) = 0.0508 m
# This keeps the area of the orifices the same as the siphon area.
B_FiSiphonManOrifices := (L_Fi - 2*ConRadius(ND_FiSiphon))/N_FiSiphonManOrifices = 11.8236 cm
HL_FiSiphonOrifice := h_orifice(D_FiSiphonManOrifices, Pi_VenaContractaOrifice, Q_Fi/N_FiSiphonManOrifices) = 12.5082 cm
HL_FiBwTotalSS := HL_FiBwInletPlumbing + HL_FiBwSS + HL_FiSiphonOrifice + HL_FiSiphonPipe + HL_FiSiphonOutlet = 1.71365 m
Rho_FiFluidized := Rho_H2O*ε_FiSand*Pi_FiFluidized + Rho_FiSand*(1 - ε_FiSand)/Pi_FiFluidized = 1743.08 kg/m^3
# Entrance Pipe from Sedimentation
# see sedimentation tank code
# Outlet Pipe to Filter (repeated here for reference and use in modular code)
L_FiEntrancePipeEst := W_DCWalkway + W_SedInletChannel + 1 m = 2.52654 m
# The extra 1 meter is for the vertical section where the pipe drops down from the sed tank exit channel.
# Previously the size of the filter entrance pipe was calculated based solely on Q.Plant and would not calculate for higher flow rates; now the min function with the Q.PipeTotal calculation avoid that failure.
ND_FiEntrancePipeMax := FloorNearest(Pipesizes[index(FloorNearest(W_SedBay/2 - ConRadius(ND_SedManifold) - 2*S_Fitting, Pipesizes[:, 1]), Pipesizes[:, 1]), 0], AvailND) = 8 in
ND_FiEntrancePipe := min(D_pipeschedule(min(Q_Plant, Q_pipetotal(innerdiameter(AvailND[last(AvailND)], PS_Default), HL_FiEntrancePipeMax, L_FiEntrancePipeEst, Nu_Water, E_Pvc, K_FiEntrancePipe)), PS_Default, HL_FiEntrancePipeMax, L_FiEntrancePipeEst, Nu_Water, E_Pvc, K_FiEntrancePipe), ND_FiEntrancePipeMax) = 8 in
N_FiEntrancePipes := ceil(Q_Plant/Q_pipetotal(innerdiameter(ND_FiEntrancePipe, PS_Default), HL_FiEntrancePipeMax, L_FiEntrancePipeEst, Nu_Water, E_Pvc, K_FiEntrancePipe)) = 1
Q_FiEntrancePipe := Q_Plant/N_FiEntrancePipes = 20 L/s
HL_FiEntrancePipe := h_l(Q_FiEntrancePipe, innerdiameter(ND_FiEntrancePipe, PS_Default), L_FiEntrancePipeEst, K_FiEntrancePipe, Nu_Water, E_Pvc) = 5.35645 cm
# Added '+ K.El90 to the loss coefficients because of the addition of the elbow. 6/25/14 mrf222
# Needs to be removed if we are no longer using the elbow!
# not using the elbow
# Inlet Weir Design
L_FiInletChannel := N_Fi*W_FiEntrance + (N_Fi - 1)*(W_FiOverflow + 2*T_PlantWall) = 1.14744 m
# Initial elevations:
ZW_FiInletChannel := Z_SedWeirExit - HL_ChannelMax - HL_FiEntrancePipe = 1.69053 m
Z_FiEntranceWeir := ZW_FiInletChannel - HL_FiEntranceWeir = 1.64608 m
Z_FiInletChannelBottomMax := Z_SedChannelBottom - max(CouplingLength(ND_FiEntrancePipe), T_PlantWall) - ElbowRadius(ND_FiEntrancePipe) - ConRadius(ND_FiEntrancePipe) - S_Fitting - SocketDepth(ND_FiEntrancePipe) = 0.813327 m
Check2 := Z_FiInletChannelBottomMax + ConRadius(ND_FiEntrancePipe) + S_Fitting + ElbowRadius(ND_FiEntrancePipe) + SocketDepth(ND_FiEntrancePipe) = 1.3504 m
Z_FiInletChannelBottomWithElbow := Z_SedChannelBottom - max(CouplingLength(ND_FiEntrancePipe), T_PlantWall) = 1.3504 m
Z_FiInletChannelBottomAtWalkway := Z_Walkway - T_PlantWall = 1.40995 m
Z_FiInletChannelBottom == {
    min(Z_FiInletChannelBottomMax, Z_FiEntranceBottomMax) if Mod == 0
    Z_FiEntranceBottomMax otherwise
}  # Changed back to original logic 6/30/2014
Z_FiInletChannelBottom := Z_FiInletChannelBottomMax  # changed 7/21/14
# We want to make the inlet channel and front box at the same elevation as the walkway.
Z_FiInletChannelBottomMax = 0.813327 m  # Inlet Channel Bottom wants to be constrained at its Max  value or at the Entrance Box Z value.
HW_FiInletChannel := ZW_FiInletChannel - Z_FiInletChannelBottom = 0.877204 m
# Pi_QFi should be in expert inputs. This is the ratio of flow through two filters based on head loss in the inlet channel and flow over the weirs into each filter.
Pi_QFi := 0.97
HL_FiInletChannel := Headloss_weir(Q_Fi, L_FiEntranceWeir) - Headloss_weir(Q_Fi*Pi_QFi, L_FiEntranceWeir) = 0.0893459 cm  # This shouldn't be redefined here.
W_FiInletChannelFlowDist := W_HorizChannel(Q_Plant, HW_FiInletChannel, HL_FiInletChannel, L_FiInletChannel, Nu_Water, E_Concrete, 0) = 0.182452 m
W_FiInletChannelMin := 10 cm
T_RemovableWeir := 2.5 cm  # This is probably wood or something else thin and sturdy
W_FiInletChannel :=
    W_FiInletChannelMin*2 + T_RemovableWeir if N_Fi ≥ 2
    max(W_FiInletChannelFlowDist, W_FiInletChannelMin) otherwise
    = 0.182452 m  # changed 7/21/14 by mrf222
# This weir is the width of the filter inlet box.
W_FiEntrance = 1.14744 m
L_FiEntranceWeir = 1.14744 m
HL_FiEntranceWeir = 0.0444477 m
Pi_QFiBw := 0.8
# The water level in the filter inlet channel will vary at most by HL_FiEntranceWeir = 0.0444477 mas the plant flow rate varies. If there are two filters and the flow rate drops to 50% of design then the water level in the inlet channel will drop  that amount when a filter is backwashed (if the backwashed filter gets its target flow rate) and the entrance weir is removed for the backwashed filter. We won't require the backwash flow rate to be the design flow rate. We'd like the backwash flow rate to be Pi_QFiBw = 0.8 of design flow in that case.
# Derivation of required head loss through backwash flow control weir to give target backwash flow when there are 2 filters and the flow rate is 50% of design.
# If Pi_QFiBw = 0.8of the filter flow is going to the backwashing filter then 1 - Pi_QFiBw of the flow is going across the Filtration flow control weir of the other filter. Use that to find the actual water elevation in the inlet channel.
# H is HL_FiBWFlowControl and Q is backwash flow through one filter. H is measured from design flow water surface in inlet channel.
# This is under design flow conditions
HL_FiEntranceWeirPi.QFiBw := Headloss_weir(Q_Fi*(1 - Pi_QFiBw), L_FiEntranceWeir) = 1.52009 cm
# Water level is this high above the Filtration flow control weir.
# Now find the required height of the backwash flow control weir to get our target Pi_QFiBw
HL_FiBwFlowControl := (HL_FiEntranceWeir - HL_FiEntranceWeirPi.QFiBw)/(1 - Pi_QFiBw^(2/3)) = 21.1587 cm
# HL_FiBFlowControl is measured from the height of the water in the inlet channel during design flow and filtration mode.
# This is the height of the cut out section in the second, narrow weir.
Z_FiBwFlowControl := ZW_FiInletChannel - HL_FiBwFlowControl = 1.47894 m  # This is the elevation of the bottom of the backwash flow control weir.
Q == 2/3*Pi_VenaContractaOrifice*sqrt(2*g)*H^(3/2)*W
W_FiBwFlowControl := W_rectweir(Q_Fi, HL_FiBwFlowControl) = 11.0477 cm  # This is the backwash flow control weir (the narrow cut out of the larger piece)
# This equation is included to define W.FiBwGate since that was the variable that was previously used. This variable should now be removed from the design and drawing code.
# There should be freefall downstream from the backwash flow control weir so that Q_Fi is unaffected by the flow control weir during filtration mode. However, this much change in water elevation will force the filters to be even deeper. So now the goal is to see what happens if we don't require freefall from the backwash flow control weir at the end of a filtration cycle when the filter head loss is high. How much is flow through a filter decreased if the water level downstream of the backwash flow control weir is H.weirsubmerged above the bottom of the weir? This will cause a filter that is clogging to begin filtering less than its share of the plant flow.
Q*Pi_QFiBw == 2/3*Pi_VenaContractaOrifice*sqrt(2*g)*(H - (HL_FiEntranceWeir - HL_FiEntranceWeirPi.QFiBw))^(3/2)*W
H_FiBwFlowControlFreefall := 10 cm
# Here we are submerging all but 10 cm of the backwash flow control weir. This means that the overflow weir that dumps water when a filter has too much head loss would be 10 cm below the design flow water surface in the inlet channel
# Eliminate Q by substituting the first equation into the second equation.
# This is when plant flow = Q.Fi and HL_FiEntranceWeir is at Q*(1 - Pi_QFiBw)
# Now calculate the flow through the backwash flow control weir that is partly a weir with free fall and partly submerged and acting like an orifice.
(Q_RectWeir(H_FiBwFlowControlFreefall, W_FiBwFlowControl) + (HL_FiBwFlowControl - H_FiBwFlowControlFreefall)*W_FiBwFlowControl*Pi_VenaContractaOrifice*sqrt(2*g*H_FiBwFlowControlFreefall))/Q_Fi = 0.868753
Pi_QFiBw*2/3*Pi_VenaContractaOrifice*sqrt(2*g)*H^(3/2)*W == 2/3*Pi_VenaContractaOrifice*sqrt(2*g)*(H - (HL_FiEntranceWeir - HL_FiEntranceWeirPi.QFiBw))^(3/2)*W
Q_BwControlWeirRemoved := Q_RectWeir(H_FiBwFlowControlFreefall, W_FiBwFlowControl) + (HL_FiBwFlowControl - H_FiBwFlowControlFreefall)*W_FiBwFlowControl*Pi_VenaContractaOrifice*sqrt(2*g*H_FiBwFlowControlFreefall)
Q_BwControlWeirRemoved = 0.0173751 m^3/s
# The ratio calculated above is the fraction of the design flow through a filter that has so much head loss that the water level is only 10 cm below the design flow water surface in the inlet channel. This shows that even with significant submergence the flow through the filter doesn't decrease much. Thus we can get away with
Pi_QFiBw*H^(3/2) == (H - (HL_FiEntranceWeir - HL_FiEntranceWeirPi.QFiBw))^(3/2)
# Monroe thinks H_FiWeirFreefall needs to be increased to H_FiBwFlowControlFreefall = 10 cm if we add the backwash flow control weir. H_FiWeirFreefall is defined in expert inputs. Note that this freefall is defined for the backwash flow control weir when it is operating in filtration mode. In backwash mode their will be plenty of freefall because the water level in the filter entrance tank is much lower during backwash.
(HL_FiEntranceWeir - HL_FiEntranceWeirPi.QFiBw) == H*(1 - Pi_QFiBw^(2/3))
# Why is this value 5%?
# It is small so that when the stop log is removed, resulting in the additional head loss, the change in head loss is not significant.
FiInletWeirRatio := .05
HL_FiInletWeirDuringBackwash := FiInletWeirRatio*HL_FiBwFlowControl
V_FiInletDuringBackwash := sqrt(2*g*HL_FiInletWeirDuringBackwash)
H_FiRemovableStopGate := Q_BwControlWeirRemoved/(V_FiInletDuringBackwash*W_FiEntrance)
H == (HL_FiEntranceWeir - HL_FiEntranceWeirPi.QFiBw)/(1 - Pi_QFiBw^(2/3))
H_FiRemovableStopGate = 0.0332423 m  # yay!
# Elevations
# The order of logic for the design of filter elevations begins with the water level in the inlet channel, from which you get all entrance box elevations. Exit box elevations are calculated based on path head loss. The elevation of the siphon outlet is below the minimum water level in the entrance box by a height equal to the total backwash head loss (through all plumbing, sand bed, and siphon outlet). The siphon inlet elevation is then set such that air will not be pulled in during low-flow backwash operation. Finally, the elevation of the bottom of the filter box is set such that the fluidized sand bed does not reach the siphon inlet orifices.
ZW_FiEntranceMax := Z_FiEntranceWeir - H_FiWeirFreefall = 1.61608 m  # Does this need to change with the addition of the second weir?
HL_FiInletWeirDuringBackwash
ZW_FiEntranceTerminal := ZW_FiEntranceMax - HL_FiOverflowWeir = 1.55009 m  # or
H_FiRemovableStopGate
Z_FiOverflowWeir := ZW_FiEntranceTerminal
ZW_FiEntranceCleanForward := ZW_FiEntranceTerminal - HL_FiDirty = 1.15009 m
Z_FiEntranceStub := ZW_FiEntranceTerminal - HL_FiDirty - H_FiForwardNoSuckAir = 1.05009 m
Z_FiEntranceBottomMax := Z_FiEntranceStub - HL_FiBwSF - H_FiBwNoSuckAir = 0.650086 m
Z_FiEntranceBottom :=
    Z_FiEntranceBottomMax if Z_FiInletChannelBottom - Z_FiEntranceBottomMax ≥ 10 cm
    Z_FiInletChannelBottom otherwise
# NOTE: The last term here is the height of the bubble of water flowing out of the top of the stubs in the exit box. We likely over-estimated this height with an anology to weir head loss. The exit stubs should first be cut longer and then shortened until the water level in the entrance box during clean forward operation is a reasonable margin (H_FiForwardNoSuckAir = 10 cm) above the entrance pipe stubs.
ZW_FiEntranceBwSS := Z_FiEntranceBottom + H_FiBwNoSuckAir = 0.850086 m
Z_FiExitStub := ZW_FiEntranceCleanForward - HL_FiCleanPath - HL_FiOutletStubs(max(Q_FiPath)) = 0.92245 m
Z_FiSiphonOutlet := ZW_FiEntranceBwSS - HL_FiBwTotalSS = -0.863563 m
# The top of the pipe stub on the siphon where it discharges into the drain channel. Like the stubs in the exit box, the stubs here should be longer than designed for at first and cut shorter until the water level in the entrance box during backwash is approximately H_FiBwNoSuckAir = 20 cm
Z_PlantDrainChannelBottom := Z_FiSiphonOutlet - L_FiSiphonChannelStubMin = -1.06356 m
Z_FiSiphonInlet := Z_FiSiphonOutlet - H_FiSiphonNoSuckAir = -0.963563 m
Z_FiBottom := Z_FiSiphonInlet - H_FiFluidizedBed - H_FiFluidizedBedToSiphon = -2.85464 m
H_FiEntrance := ZW_FiInletChannel + H_PlantFreeboard - Z_FiEntranceBottom = 1.14044 m
Z_FiTop := Z_FiEntranceBottom + H_FiEntrance = 1.79053 m
H_Fi := Z_FiTop - Z_FiBottom = 4.64517 m
Z_FiExitBottom := Z_FiEntranceBottom = 0.650086 m
H_FiExit := H_FiEntrance = 1.14044 m
ZW_FiBwSS := Z_FiSiphonOutlet + HL_FiSiphonOrifice + HL_FiSiphonPipe + HL_FiSiphonOutlet = -0.557896 m
ZW_FiClean := Z_FiExitStub + HL_FiOutletStubs(max(Q_FiPath)) + HL_FiOutletPlumbingAve(Q_FiLayer1, Q_FiLayer3) + HL_FiCleanLayer = 111.712 cm
ZW_FiMax := Z_FiExitStub + HL_FiOutletStubs(max(Q_FiPath)) + HL_FiOutletPlumbingAve(Q_FiLayer1, Q_FiLayer3) + HL_FiTerminal = 151.712 cm
H_FiOverflowMin := H_FiBypassSafety + OuterDiameterFittingPVC(ND_FiBypass) + S_Fitting = 0.386537 m
Z_FiOverflowBottom := min(Z_FiTop - H_FiOverflowMin, Z_FiOverflowWeir - H_FiOverflowWeirFreefall) = 1.40399 m
H_FiOverflow := Z_FiTop - Z_FiOverflowBottom = 0.386537 m
Z_FiDistPipe := Z_FiExitBottom - H_FiDistDrop = -0.465461 m
# This is the center line of the pipe through the wall.  This is a maximum based on zero flow and the goal of wanting to be able to initiate backwash at the beginning of filtration. This constraint could be relaxed if needed.
Z_FiSiphonCouplingMax := Z_FiExitStub - outerradius(ND_FiSiphon) = 0.785925 m
H_FiSiphonMax := ZW_FiMax - Z_FiSiphonOutlet = 2.38068 m
L_FiSiphonTop := L_Fi/2 - ElbowRadius(ND_FiSiphon) + ShortTeeLength(ND_FiBwManBranch) + SocketDepth(ND_FiSiphon) + T_FiWall + outerradius(ND_FiSiphon) = 0.873871 m
# The following is the minimum elevation of the top of the siphon where it goes through the filter wall so that it will not overflow when the air is compressed in forward filtration mode. See Monroe's filtration notes for a derivation of the following in terms of simple variables. This expression was derived for the variables defined here.
Z_FiSiphonCouplingMin := (P_Atm*(ZW_FiMax + ZW_FiBwSS) + Rho_H2O*g*(ZW_FiMax^2 + ZW_FiMax*L_FiSiphonTop - ZW_FiMax*Z_FiSiphonOutlet))/(2*P_Atm + Rho_H2O*g*(L_FiSiphonTop + ZW_FiMax - Z_FiSiphonOutlet)) + outerradius(ND_FiSiphon) = 0.757303 m
Z_FiSiphonCouplingMax - Z_FiSiphonCouplingMin = 2.86211 cm
# Not much room to spare here! We need to always check this and somehow report an error if this is negative!!!!
# This is negative at 50 L/s
W_SedExitChannel = 0.3485 m
S_Fitting + ConRadius(ND_FiEntrancePipe) + T_SedWeir + W_ChannelMin = 0.358269 m
Z_FiSiphonCoupling := Z_FiSiphonCouplingMax = 0.785925 m
W_SedExitChannelPostWeir = 15 cm
W_SedExitChannelPreWeir = 15.85 cm
H_FiSiphonPressure := ZW_FiMax - Z_FiSiphonCouplingMin = 0.759813 m  # This cannot be greater than Z_FiSiphonOutlet - Z_FiBottom = 1.99108 m
Z_FiAirRemovalBlockBottom := 0.15*S_FiEntranceBaffle + Z_FiEntranceBottom
Z_FiAirRemovalBlockTop := ZW_FiEntranceBwSS - H_FiAirRemovalBlockSubmerged = 0.800086 m
# Siphon Valve Size
HL_FiSiphonValveWater := (Z_FiSiphonCoupling - ND_FiSiphon/2) - (Z_FiSiphonOutlet + HL_FiSiphonPipe + HL_FiSiphonOutlet) = 1.3419 m
# The available head is equal to the difference between the bottom of the siphon pipe and the steady state water level in the filter.  This is a head available in terms of water.
Vol_FiSiphonAir := (CouplingLength(ND_FiSiphon) + 4*outerdiameter(ND_FiSiphon) + 2*(Z_FiSiphonCoupling - Z_FiSiphonOutlet))*π/4*innerdiameter(ND_FiSiphon, PS_Default)^2 = 226.971 L
# Goal is to fill siphon tube with air in 10 seconds. To account for the diminishing head as the siphon tube fills with air we will use 0.5 seconds. This rapid fill is desirable so that the operator can open and then immediately close the valve without having to wait. This is important because the operator won't be able to see the air filling up the siphon tube.
Ti_FiSiphonBreak := 10 s
# Monroe increased this to 1 s (from 0.5 s) because the video of starting backwash showed the operator moving the valve slowly. This indicatess that it wasn't necessary to have such a large valve at Tamara.
# changed to 10s 1/7/2012
Q_FiSiphonAir := Vol_FiSiphonAir/Ti_FiSiphonBreak = 22.6971 L/s
HL_FiSiphonValveAir := HL_FiSiphonValveWater*Rho_H2O/Rho_Air = 1114.54 m  # This is the head available in terms of air.
K_FiSiphonValve := 3
# Entrance and Exit loses and ball valve losses
L_FiSiphonBreak := Z_FiBottom + H_Fi - Z_FiSiphonCoupling = 1.00461 m
# Estimated length of the pipe that will be connected to the air valve. Air valve will be at the very top of the filter.
ND_FiSiphonAirValve := NominalPipeSize(D_PipeTotal(Q_FiSiphonAir, HL_FiSiphonValveAir, L_FiSiphonBreak, Nu_Air, E_Pvc, K_FiSiphonValve)) = 1 in
ND_FiAirReleaseMid := 2 in  # added 7/18/14 by mrf222
# Sand Removal Pipe
H_FiSandOutlet := 1 m
# This can't be set any higher because the available head will be insufficient to pump sand unless we figure out a way to maintain a higher water level in the filter during the sand dump. See the small head loss available at the finish of pumping the sand below.
# to be high enough to dump into a 55 gal drum?
Z_FiSandOutlet := Z_FiBottom + H_FiSandOutlet = -1.85464 m  # 7/9/2014: We want the outlet to exit between the 6th and 7th sand layers in the filter. mrf222
# This is higher than the sed tank drain channel. Thus the backwash water can easily discharge into the drain channel
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HL_FiSandOutlet := Z_FiSiphonOutlet - Z_FiSandOutlet = 0.99108 m  # This isn't quite right because of the different densities.
# Calculating head loss and density for this problem is a bit complicated. The sand bed has a density of
Rho_FiFluidized = 1743.08 kg/m^3
# This ends up changing Nu.Water, but that doesn't change the results because we are in the very turbulent domain of the Moody diagram. The available head has to take into account the different densities of the fluidized bed and the water above the bed. As the fluidized bed is drained the available head will decrease. Would it be possible to drain the sand out of the bed at the very beginning of the backwash cycle while the water depth above the bed is gradually decreasing? This extra bed depth would provide more head to push the sand through the sand outlet.
# At the beginning of sand pumping the filter box has fluidized sand (and thus a high fluid density) and thus the pressure at the entrance to the sand dump is high. At the end of the sand dump the filter is filled with water and thus the pressure at the entrance to the sand dump is much lower and yet the sand dump pipe is still filled with the high density fluidized sand.
HL_FiSandOutletStart := ((Z_FiSiphonOutlet - Z_FiBottom - H_FiSand*Pi_FiFluidized)*Rho_H2O + H_FiSand*Pi_FiFluidized*Rho_FiFluidized + (-H_FiSandOutlet*Rho_FiFluidized))/Rho_FiFluidized = 0.863189 m
HL_FiSandOutletFinish := ((Z_FiSiphonOutlet - Z_FiBottom)*Rho_H2O + (-H_FiSandOutlet*Rho_FiFluidized))/Rho_FiFluidized = 0.142279 m
V_FiSand := W_Fi*L_Fi*H_FiSand*Pi_FiFluidized = 3759.18 L  # Total volume of the fluidized bed
# Use the largest pipe that will fit between the branch lines (but not between the backwash branch lines)
Q_FiSandOutletStart := Q_pipetotal(innerdiameter(ND_FiSandOutlet, PS_Default), HL_FiSandOutletStart, H_FiSandOutlet, Nu_Water*Rho_H2O/Rho_FiFluidized, E_Pvc, K_PipeExit + K_PipeEnt + 2*K_El90) = 5.10049 L/s
Q_FiSandOutletFinish := Q_pipetotal(innerdiameter(ND_FiSandOutlet, PS_Default), HL_FiSandOutletFinish, H_FiSandOutlet, Nu_Water*Rho_H2O/Rho_FiFluidized, E_Pvc, K_PipeExit + K_PipeEnt + 2*K_El90) = 2.06762 L/s
Q_FiSandOutlet := (Q_FiSandOutletStart + Q_FiSandOutletFinish)/2  # This isn't quite right, but it is close.
Ti_FiSand := V_FiSand/Q_FiSandOutlet = 17.481 min  # This is the time required to empty the filter of the sand.
Ti_FiSandDrum := 220 L/Q_FiSandOutlet = 61.3829 s
Q_FiSandOutletFinish/(innerdiameter(ND_FiSandOutlet, PS_Default)^2/4*π) = 0.86416 m/s  # The velocity in the pipe is far greater than the backwash velocity
# Estimate of the flow rate that would allow sand to settle within the vertical pipe. This flow rate is really low and so the valve will need to be almost closed before the sand stops flowing.
Q_Settle := 5*mm/s*(innerdiameter(ND_FiSandOutlet, PS_Default)^2/4*π) = 0.0119632 L/s
# Inlet Channel Design
L_FiInletChannel := N_Fi*W_FiEntrance + (N_Fi - 1)*(W_FiOverflow + 2*T_PlantWall) = 1.14744 m
L_FiInletChannelConsidered := L_FiInletChannel/N_Fi  # Added 6/25/14 by mrf222
H_FiInletChannel := Z_FiTop - Z_FiInletChannelBottom = 0.977204 m
# Weir control heights: mrf222 7/16/14
Z_FiBwFlowControlSlot := Z_FiEntranceWeir - HL_FiBwFlowControl
Z_FiBwFlowControlWide := Z_FiEntranceWeir - H_FiRemovableStopGate
IncludeElbow := ElbowRadius(ND_FiEntrancePipe) + W_FiInletChannel/2
# This value is subtracted from L.FiInletPipe if the elbow is included in the design.
# Trunk Line Purge Valves
# Here we design for a certain scour velocity in the trunk lines BEYOND the manifold (outside of the filter box). We likely won't get sufficient scour velocities within the manifold where there is only a fraction of the total flow rate in the lines (particularly at the ends of the manifolds). Therefore these valves will probably not be all that effective if there is a serious solids accumulation problem. Hopefully accumulation of solids in the inlet plumbing will not be a problem when our manifold is constructed such that there is no sand leakage.
# For operation, the line which is being purged must be plugged from the entrance box so that the valve does not need to handle both the full filter flow and the trunk flush flow. For best operation, the other pipe stubs in the entrance box should be pulled out so that the entrance box water can contribute to the flow for a longer run at scour velocity.
# Decide on a reasonable scour velocity for compacted sludge
V_Scour(Rho_Particle, D_Particle, θ) := sqrt(2*sqrt(500000)/(3*0.332)*(Rho_Particle - Rho_H2O)/Rho_H2O*g*D_Particle*tan(θ))
V_FiTrunkFlush := V_Scour((2.65*gm/mL + Rho_FB)/2, 0.1 mm, 5 deg) = 0.317119 m/s
V_FiTrunkFlush := V_Scour(Rho_FiSand, D_FiSand60, 5 deg) = 1.28775 m/s
# We won't be able to flush sand out of the line - the scour velocity is too high no matter how big a valve we choose.
# Head loss calculations and valve sizes
V_FiTrunkFlush := 0.3*m/s
Q_FiBwTrunkFlush := π*innerdiameter(ND_FiBwTrunk, PS_Default)^2/4*V_FiTrunkFlush = 14.8206 L/s
HL_FiSandBedBwTrunkFlush := h_lKozeny(H_FiSandActive, D_FiSand60, Q_FiBwTrunkFlush/A_FiActive, ε_FiSand, Nu_Water) = 1.55799 m
HL_FiBwSlotsTrunkFlush := h_orifice(D_circle(A_FiBwManSlots*ε_FiSand), Pi_VenaContractaOrifice, Q_FiBwTrunkFlush) = 0.322057 m
H_FiBwTrunkFlushAvail := ZW_FiClean - Z_FiBottom - outerradius(ND_FiBwManBranch) - HL_FiSandBedBwTrunkFlush - HL_FiBwSlotsTrunkFlush = 2.06758 m
ND_FiBwTrunkFlushValve := D_pipeschedule(Q_FiBwTrunkFlush, PS_Default, H_FiBwTrunkFlushAvail, 5 cm, Nu_Water, E_Pvc, K_PipeEnt + K_GateValve + K_PipeExit) = 3 in
Q_FiTrunkFlush := π*innerdiameter(ND_FiTrunk, PS_Default)^2/4*V_FiTrunkFlush = 5.62489 L/s
HL_FiSlotsTrunkFlush := h_orifice(D_circle(A_FiManSlots*ε_FiSand), Pi_VenaContractaOrifice, Q_FiTrunkFlush) = 0.0115977 m
HL_FiElbowTrunkFlush := h_e(Q_FiTrunkFlush, innerdiameter(ND_FiTrunk, PS_Default), K_El90) = 0.412985 cm
HL_FiSandBedTrunk2Flush := h_lKozeny(H_FiSandActive - 2*H_FiLayer, D_FiSand60, Q_FiTrunkFlush/A_FiActive, ε_FiSand, Nu_Water) = 0.403591 m
HL_FiSandBedTrunk3Flush := h_lKozeny(H_FiSandActive - 4*H_FiLayer, D_FiSand60, Q_FiTrunkFlush/A_FiActive, ε_FiSand, Nu_Water) = 0.215874 m
H_FiTrunk2FlushAvail := ZW_FiClean - Z_FiBottom - outerradius(ND_FiBwManBranch) - 2*H_FiLayer - HL_FiSandBedTrunk2Flush - HL_FiSlotsTrunkFlush - HL_FiElbowTrunkFlush = 3.12831 m
H_FiTrunk3FlushAvail := ZW_FiClean - Z_FiBottom - outerradius(ND_FiBwManBranch) - 4*H_FiLayer - HL_FiSandBedTrunk3Flush - HL_FiSlotsTrunkFlush - HL_FiElbowTrunkFlush = 2.91603 m
H_FiTrunk4FlushAvail := ZW_FiClean - Z_FiBottom - outerradius(ND_FiBwManBranch) - 6*H_FiLayer - HL_FiSlotsTrunkFlush - HL_FiElbowTrunkFlush = 2.7319 m
ND_FiTrunk2FlushValve := D_pipeschedule(Q_FiTrunkFlush, PS_Default, H_FiTrunk2FlushAvail, 5 cm, Nu_Water, E_Pvc, K_PipeEnt + K_GateValve + K_PipeExit) = 1.5 in
ND_FiTrunk3FlushValve := D_pipeschedule(Q_FiTrunkFlush, PS_Default, H_FiTrunk3FlushAvail, 5 cm, Nu_Water, E_Pvc, K_PipeEnt + K_GateValve + K_PipeExit) = 1.5 in
ND_FiTrunk4FlushValve := D_pipeschedule(Q_FiTrunkFlush, PS_Default, H_FiTrunk4FlushAvail, 5 cm, Nu_Water, E_Pvc, K_PipeEnt + K_GateValve + K_PipeExit) = 1.5 in
ND_FiTrunkFlushValve := max(ND_FiTrunk2FlushValve, ND_FiTrunk3FlushValve, ND_FiTrunk4FlushValve) = 1.5 in
# Main Plant Drain Channel
# To calculate the maximum possible flow through the drainchannel, all tanks are assumed to be initially full and emptying in the same time
# Note that the tank heights are used instead of the water levels in the calculation of maximum flow to have a conservative design.
Q_TankDrainMax := Q_pipeminor(innerdiameter(ND_EtDrain, PS_Default), H_Et, K_PipeEnt + K_PipeExit)*(N_EtFullHopper + 1) + Q_pipeminor(innerdiameter(ND_FlocValve, PS_Default), H_Floc, K_PipeEnt + K_PipeExit)*(last(Y_FlocDrainValves) + 1) + Q_pipeminor(innerdiameter(ND_SedSludgePipe, PS_Default), H_Sed, K_PipeEnt + K_PipeExit)*N_SedBays*N_SedTanks
Q_PlantDCMax := Q_TankDrainMax + N_Fi*(1 + N_Fi > 1)*Q_Fi = 0.219255 m^3/s
L_PlantDC := 2*T_PlantWall + N_SedTanks*(W_Sed + T_SedWallDivider) - T_SedWallDivider + N_FlocChannels*(W_FlocChannel + T_FlocChannelWall) - T_FlocChannelWall + W_EtWalkway + 2*T_PlantWall + W_Et = 7.38857 m
W_PlantDC := W_DCWalkway = 1 m
H_PlantDC := H_HorizChannelMin(Q_PlantDCMax, W_PlantDC, L_PlantDC, Nu_Water, E_Concrete, 1) = 0.265663 m
Z_PlantLowerDCBottom := min(Plant_Origin[2] - H_PlantDC, Z_FiSiphonOutlet - L_FiSiphonChannelStubMin, Z_Walkway - T_Floor - H_HumanAccess) = -1.06356 m
Z_PlantUpperDCBottom := min(Z_FlocTank - H_PlantDC, Z_Walkway - T_Floor - H_HumanAccess) = -0.265663 m
# Outlet to Distrubution Pipe Weir Functions
R_Fountain(ND_Pipe, H_PipeAboveSurface, V_Horizontal) :=
    PipeContribution ← outerradius(ND_Pipe)
    time ← (H_PipeAboveSurface*2/g)^(1/2)
    displacement ← V_Horizontal*time
    R_Fountain ← displacement + PipeContribution
    return R_Fountain
S_PipeStubWeir(Q, ND_Pipe, H_PipeAboveSurface, SF, PipeSpecification) :=
    Rad ← (outerradius(ND_Pipe) + innerR(ND_Pipe, PipeSpecification))/2
    circumference ← Rad*2*π
    PipeRadius ← outerradius(ND_Pipe)
    yc ← HW_Critical(Q, circumference)
    vel ← V_Horizontal(yc)
    FountainRadius ← R_Fountain(ND_Pipe, H_PipeAboveSurface, vel)
    Spacing ← SF*FountainRadius
    return Spacing
