# [reference: EtFlocSedFi.xmcd]
OutsideBox := BoxF([0 m; 0 m; 0 m], [5 m; 5 m; 5 m], [0; 0; 0]*deg)
RemoveInsideBox := Box
Tank_Origin := [0 m; 0 m; 0 m]
[0.08 m; 0.05 m]
Tank_Dimensions := [0.08 m; 0.07 m; 0.06 m]
Tank_Thickness := 0.01 m
BOXLayer := layer_new("BOX", green)
MyTank := Tank(Tank_Origin, Tank_Dimensions, Tank_Thickness)
BOXFreeze := FreezeLayer("BOX")
MakeLayer := layer_new("Box1", purple)
BOX
FreezeMyLayer := FreezeLayer("Box1")
MakeLayer2 := ("box2", yellow)
FreezeMyLayer2 := FreezeLayer("Box2")
MyTankFinal := stack(□)  # error: This '(' requires a matching ')'.
# [component: inputs MyTank]
