# Fitting Cheat Sheet
# mrf222 2-21-16
# array of vertices
# [reference: EtFlocSedFi.xmcd]
# [reference: PipeDatabase.xmcd]
# [reference: MtoATranslators.xmcd]
# [reference: MtoATranslatorsWrapped.xmcd]
# [reference: PlumbingF.xmcd]
ND_Pipe := 2 in
EN := SDR_26
# Array number displacement
# First column: Tees
# Second Column: Elbows
# HOW TO USE THIS FILE:
# step 1: draw the 'fittings' script in AutoCad. Laythw.
# step 2: look for the fitting which matches the orientation you want-- careful to check that it is correct relative to the origin point you have.
# step 3: take note of the z, x, and y value of the origin point (all in units of 1 meter)
# step 4: look up your orientation in the tables below:
# z = 'floor' number
# x = row number
# y = column number
# This is the orientation you need for your fitting!
# step 5: IF your orientation does not exist, test out a few weird orientations using floor 5 below...
# Degree Changes
# Floor 1: all alone
yzero := [0; 0; 0]*deg
xzero := [0; 0; 0]*deg
zzero := [0; 0; 0]*deg
yplus := [0; 90; 0]*deg
xplus := [90; 0; 0]*deg
zplus := [0; 0; 90]*deg
xminus := [-90; 0; 0]*deg
yminus := [0; -90; 0]*deg
zminus := [0; 0; -90]*deg
yzero_2 := [90; 0; 0]*deg
xzero_2 := [0; 0; 0]*deg
zzero_2 := [90; 0; 0]*deg
yplus_2 := [90; 90; 0]*deg
xplus_2 := [90; 0; 0]*deg
zplus_2 := [90; 0; 90]*deg
xminus_2 := [90; 0; 0]*deg
yminus_2 := [90; -90; 0]*deg
zminus_2 := [90; 0; -90]*deg
# Floor 3: all y 90
yzero_3 := [0; 90; 0]*deg
xzero_3 := [0; 0; 0]*deg
zzero_3 := [0; 90; 0]*deg
yplus_3 := [90; 90; 0]*deg
xplus_3 := [90; 90; 0]*deg
zplus_3 := [0; 90; 90]*deg
xminus_3 := [-90; 90; 0]*deg
yminus_3 := [0; 90; 0]*deg
zminus_3 := [0; 90; -90]*deg
# Floor 4: all z 90
yzero_4 := [0; 0; 90]*deg
xzero_4 := [0; 0; 0]*deg
zzero_4 := [0; 0; 90]*deg
yplus_4 := [0; 90; 90]*deg
xplus_4 := [90; 0; 90]*deg
zplus_4 := [0; 0; 90]*deg
xminus_4 := [90; 0; 90]*deg
yminus_4 := [0; -90; 90]*deg
zminus_4 := [0; 0; -90]*deg
# Floor 5: random (change these if your orientation doesn't show up
yzero_5 := [0; 180; -90]*deg
xzero_5 := [0; 0; 0]*deg
zzero_5 := [0; -180; 90]*deg
yplus_5 := [0; 90; -90]*deg
xplus_5 := [-90; 90; 90]*deg
zplus_5 := [0; 180; -90]*deg
xminus_5 := [-90; 180; -90]*deg
yminus_5 := [90; 180; -90]*deg
zminus_5 := [90; -180; -90]*deg
# Make a nested array of all of these values
degrees := [
    xzero, xzero_2, xzero_3, xzero_4, xzero_5;
    xplus, xplus_2, xplus_3, xplus_4, xplus_5;
    xminus, xminus_2, xminus_3, xminus_4, xminus_5;
    yzero, yzero_2, yzero_3, yzero_4, yzero_5;
    yplus, yplus_2, yplus_3, yplus_4, yplus_5;
    yminus, yminus_2, yminus_3, yminus_4, yminus_5;
    zzero, zzero_2, zzero_3, zzero_4, zzero_5;
    zplus, zplus_2, zplus_3, zplus_4, zplus_5;
    zminus, zminus_2, zminus_3, zminus_4, zminus_5
]
makescript :=
    i ← 0
    script ← ""
    cord ← [0; 0; 0]*m
    while i < 10
        j ← 0
        i_use ← i - 5 if i > 4
        i_use ← i otherwise
        tee ← 5 if i_use == i
        tee ← 0 otherwise
        while j < 3
            k ← 0
            while k < 3
                cord ← [j + tee; k + tee; i_use]*m
                AngleVector ← degrees[:, i_use][k*j + k]
                script ← stack(script, ElbowF(cord, AngleVector, ND_Pipe, EN)) if i < 5
                script ← stack(script, TeeF(cord, AngleVector, ND_Pipe, EN)) otherwise
                k ← k + 1
            j ← j + 1
        i ← i + 1
    return script
layer_all := layer_new("all", green)
layer_allFrz := FreezeLayer("all")
drawit := stack(layer_all, makescript, layer_allFrz)
# [component: inputs drawit]
cord := [-1; -1; 0]*m
testone := stack(ElbowF(cord, yplus_5, ND_Pipe, EN), Torus(cord, .1 m, .01 m))
# [component: inputs testone]
