Q_Plant := 5*L/s
HL_FlocMax := 40 cm
H_SedSlopesToFlocWeirMin := 25 cm
T_FlocSlab := 15 cm
T_SedWall := 15 cm
T_FlocWall := 15 cm
T_FiBoxWall := 15 cm
T_PlantWall := 15 cm
T_PlantFloor := 20 cm
T_ChemSlab := 15 cm
C_CoagDoseMax := 40*mg/L
C_ChlorDoseAve := 1*mg/L
T_SedDividingWall := T_SedWall
T_SedChannelWall := T_SedWall
# [reference: ExpertInputs2.xmcd]
# [reference: MathFunctions.xmcd]
# [reference: PipeDatabase.xmcd]
# [reference: MaterialsDatabase.xmcd]
# [reference: FluidsFunctions.xmcd]
# [reference: SedimentationTankpc479.xmcd]
# [reference: LFOM.xmcd]
# [reference: EntranceTankFlocculatorLow.xmcd]
# [reference: StackedRapidSandFilterLow.xmcd]
# [reference: ChemicalDoseController.xmcd]
# Mathcad to AutoCAD translators:
# These are the codes that take MathCAD outputs and create AutoCAD scripts that are used to draw the plant (formerly Basics)
# [reference: MtoATranslators.xmcd]
# The wrapped MtoA translator contains the functions that the user will want to access. These functions will draw pieces with full functionality - specifying the location, dimension, and orientation of the object. Also, it contains layer control and subtraction capabilities for grouped objects.
# [reference: MtoATranslatorsWrapped.xmcd]
# AutoCAD drawing functions:
# [reference: ChannelF.xmcd]
# [reference: PlumbingF.xmcd]
# [reference: TankF.xmcd]
# [reference: StairsF.xmcd]
# [reference: DrainChannelF.xmcd]
# Sedimentation Tank Drawing
# Layers
SedTankLayer := layer_new("SedTankCon", grey)
SedValveLayer := layer_new("SedValvePlu", blue3)
SelectSedCon := SelectLayer("SedTankCon")
SelectSedValves := SelectLayer("SedValvePlu")
SedConFrz := FreezeLayer("SedTankCon")
SedValveFrz := FreezeLayer("SedValvePlu")
SubtractFromSedTank := SubtractF(["SedTankCon"], "DeleteMe")
SedPipeLayer := layer_new("SedPipePlu", blue)
SedAdapterLayer := layer_new("SedAdapterPlu", blue2)
SelectSedPipes := SelectLayer("SedPipePlu")
SelectSedAdapters := SelectLayer("SedAdapterPlu")
SedPipeFrz := FreezeLayer("SedPipePlu")
SedAdapterFrz := FreezeLayer("SedAdapterPlu")
SedFittingLayer := layer_new("SedFittingPlu", green)
SedJetReverser_Layer := layer_new("SedJetReverserPlu", blue)
SelectSedFittings := SelectLayer("SedFittingPlu")
SedJetReverserFrz := FreezeLayer("SedJetReverserPlu")
SedFittingFrz := FreezeLayer("SedFittingPlu")
SedInletRemovables := layer_new("SedInletRemovables", red)
SedFerncoLayer := layer_new("SedFerncoPlu", purple)
SedInletRemovablesSelect := SelectLayer("SedInletRemovables")
SelectSedFerncos := SelectLayer("SedFerncoPlu")
SedFerncoFrz := FreezeLayer("SedFerncoPlu")
SedInletRemovablesFrz := FreezeLayer("SedInletRemovables")
SedLaunderRemovableLayer := layer_new("SedLaunderRemovablePlu", red)
SelectLaunderSedRemovables := SelectLayer("SedLaunderRemovablePlu")
SedLaunderRemovableFrz := FreezeLayer("SedLaunderRemovablePlu")
DrainPipeBoxLayer := layer_new("DrainPipeBox", grey)
SedModPipeLayer := layer_new("SedModPipePlu", blue3)
DrainPipeBoxFrz := FreezeLayer("DrainPipeBox")
SedModPipeFrz := FreezeLayer("SedModPipePlu")
SedModSpacerLayer := layer_new("SedModSpacerPlu", blue)
SedModSpacerFrz := FreezeLayer("SedModSpacerPlu")
SedLaminaLayer := layer_new("SedModLamella", purple)
SedLaminaFrz := FreezeLayer("SedModLamella")
SedModCapLayer := layer_new("SedModCapPlu", red)
SedModCapFrz := FreezeLayer("SedModCapPlu")
SedPlateFrameFittingsLayer := layer_new("SedPlateFrameFittingsPlu", green)
SedPlateFrameFittingsFrz := FreezeLayer("SedPlateFrameFittingsPlu")
SedPlateFramePipesLayer := layer_new("SedPlateFramePipesPlu", blue)
SedPlateFramePipesFrz := FreezeLayer("SedPlateFramePipesPlu")
SedDiffuserLayer := layer_new("SedManDiffuserPlu", blue)
SedDiffuserFreeze := FreezeLayer("SedManDiffuserPlu")
SelectSedDiffuser := SelectLayer("SedManDiffuserPlu")
SedInletDrainRemovables := layer_new("SedInletDrainRemovables", red)
SedExitDrainRemovables := layer_new("SedExitDrainRemovables", red)
SedInletDrainRemovablesSelect := SelectLayer("SedInletDrainRemovables")
SedExitDrainRemovablesSelect := SelectLayer("SedExitDrainRemovables")
SedInletDrainRemovablesFrz := FreezeLayer("SedInletDrainRemovables")
SedExitDrainRemovablesFrz := FreezeLayer("SedExitDrainRemovables")
SedToFiPipeLayer := layer_new("SedToFiPipePlu", blue)
SelectSedToFitPipe := SelectLayer("SedToFiPipePlu")
SedToFiPipeFrz := FreezeLayer("SedToFiPipePlu")
# Sedimentation Tank Concrete (excluding lamella support ledge)
# Tank and side slopes
SedTank := Tank(Plant_Origin + [0 m; 0 m; -OR(ND_SedJetReverser)], [L_Sed; W_Sed; H_Sed], T_SedDividingWall)
SedSlopePolyline := Pline3D([
    [Plant_Origin[0]; Plant_Origin[1] + W_Sed; Plant_Origin[2] - OD(ND_SedJetReverser)] + [0 m; 0 m; 0 m];
    [Plant_Origin[0]; Plant_Origin[1] + W_Sed; Plant_Origin[2] - OD(ND_SedJetReverser)] + [0 m; 0 m; OR(ND_SedJetReverser) + H_SedSideSlopes];
    [Plant_Origin[0]; Plant_Origin[1] + W_Sed; Plant_Origin[2] - OD(ND_SedJetReverser)] + [0 m; -W_Sed/2 + IR(ND_SedJetReverser, PS_SedJetReverser); OR(ND_SedJetReverser)];
    [Plant_Origin[0]; Plant_Origin[1] + W_Sed; Plant_Origin[2] - OD(ND_SedJetReverser)] + [0 m; -W_Sed/2 - IR(ND_SedJetReverser, PS_SedJetReverser); OR(ND_SedJetReverser)];
    [Plant_Origin[0]; Plant_Origin[1] + W_Sed; Plant_Origin[2] - OD(ND_SedJetReverser)] + [0 m; -W_Sed; OR(ND_SedJetReverser) + H_SedSideSlopes];
    [Plant_Origin[0]; Plant_Origin[1] + W_Sed; Plant_Origin[2] - OD(ND_SedJetReverser)] + [0 m; -W_Sed; 0 m];
    [Plant_Origin[0]; Plant_Origin[1] + W_Sed; Plant_Origin[2] - OD(ND_SedJetReverser)] + [0 m; 0 m; 0 m]
])
ExtrudeSedSlopes := ExtrudeLast(-L_SedUpflow)
SedWestWallThicken :=
    BoxF(Plant_Origin + [-L_Sed - T_SedDividingWall; -T_SedWall; -OR(ND_SedJetReverser) - T_SedDividingWall], Plant_Origin + [-L_Sed - T_SedWall; W_Sed + T_SedWall; Z_SedTop], [0; 0; 0]*deg) if T_SedWall > T_SedDividingWall
    view("t") otherwise
SedEastWallThicken :=
    BoxF(Plant_Origin + [T_SedDividingWall; -T_SedWall; -OR(ND_SedJetReverser) - T_SedDividingWall], Plant_Origin + [T_SedWall; W_Sed + T_SedWall; Z_SedTop], [0; 0; 0]*deg) if T_SedWall > T_SedDividingWall
    view("t") otherwise
SedConScript1 := stack(SedTank, SedSlopePolyline, ExtrudeSedSlopes, SedWestWallThicken, SedEastWallThicken)
# Support ledges and floc weir
SedLamellaSupportLedge1 := BoxF(Plant_Origin + [0 m; 0 m; Z_SedLamellaSupportLedge - T_ConcreteMin], Plant_Origin + [-L_SedUpflow; T_ConcreteMin; Z_SedLamellaSupportLedge], [0; 0; 0]*deg)
SedLamellaSupportLedge2 := BoxF(Plant_Origin + [0 m; W_Sed; Z_SedLamellaSupportLedge - T_ConcreteMin], Plant_Origin + [-L_SedUpflow; W_Sed - T_ConcreteMin; Z_SedLamellaSupportLedge], [0; 0; 0]*deg)
SedLaunderLedge := BoxF([0; W_Sed - 1/2*W_Sed + OR_Fitting(ND_SedLaunder); Z_SedLaunder - OR_Fitting(ND_SedLaunder)] + Plant_Origin, [
    -2*SocketDepth(ND_SedLaunder);
    W_Sed - 1/2*W_Sed - OR_Fitting(ND_SedLaunder);
    Z_SedLaunder - OR_Fitting(ND_SedLaunder) - T_ConcreteMin
] + Plant_Origin, [0; 0; 0]*deg)
SedFlocWeir := BoxF([Plant_Origin[0] - L_SedUpflow - T_SedWeir; Plant_Origin[1] - zc; Plant_Origin[2] + Z_SedFlocWeir], [
    Plant_Origin[0] - L_SedUpflow;
    Plant_Origin[1] + W_Sed + zc;
    Plant_Origin[2] - OD(ND_SedJetReverser)
], [0; 0; 0]*deg)
SedConScript2 := stack(SedLamellaSupportLedge1, SedLamellaSupportLedge2, SedLaunderLedge, SedFlocWeir)
# Inlet and exit channels
ChannelVertBox := BoxF([-L_Sed + W_SedInletChannel + W_SedExitChannel + T_SedWeir; W_Sed; Z_SedChannelBottom] + Plant_Origin, [-L_Sed + W_SedInletChannel + W_SedExitChannel + T_SedWeir + T_SedChannelWall; 0 m; Z_SedTop] + Plant_Origin, [0; 0; 0]*deg)
ChannelHorizBox := BoxF([-L_Sed; W_Sed; Z_SedChannelBottom] + Plant_Origin, [
    -L_Sed + W_SedExitChannel + T_SedWeir + W_SedInletChannel + T_SedChannelWall;
    0 m;
    Z_SedChannelBottom - T_SedChannelWall
] + Plant_Origin, [0; 0; 0]*deg)
ChannelWallCutout1 := BoxF(Plant_Origin + [-L_Sed + W_SedInletChannel + T_SedWeir + W_SedExitChannel; W_Sed; Z_SedChannelBottom], Plant_Origin + [-L_Sed; W_Sed + T_SedDividingWall; Z_SedTop], [0; 0; 0]*deg)
ChannelWallCutout2 := BoxF(Plant_Origin + [-L_Sed + W_SedInletChannel + T_SedWeir + W_SedExitChannel; 0 m; Z_SedChannelBottom], Plant_Origin + [-L_Sed; -T_SedDividingWall; Z_SedTop], [0; 0; 0]*deg)
SedChannelScript := stack(ChannelVertBox, ChannelHorizBox)
# Floc Hopper Front and Back Slopes
SedHopperFrontBackPline := Pline3D([
    [Plant_Origin[0] - L_Sed; Plant_Origin[1]; Plant_Origin[2] - OD(ND_SedJetReverser)];
    [Plant_Origin[0] - L_Sed + L_SedHopper; Plant_Origin[1]; Plant_Origin[2] - OD(ND_SedJetReverser)];
    [
        Plant_Origin[0] - L_Sed + L_SedHopper;
        Plant_Origin[1];
        Plant_Origin[2] + Z_SedHopperBottom + H_SedHopperFrontSlope
    ];
    [Plant_Origin[0] + X_SedHopperBottom; Plant_Origin[1]; Plant_Origin[2] + Z_SedHopperBottom];
    [
        Plant_Origin[0] - L_Sed;
        Plant_Origin[1];
        Plant_Origin[2] + Z_SedHopperBottom + H_SedHopperBackSlope
    ];
    [Plant_Origin[0] - L_Sed; Plant_Origin[1]; Plant_Origin[2] - OD(ND_SedJetReverser)]
])
ExtrudeSedHopperFrontBack := ExtrudeLast(-W_Sed)
SedHopperSidePline := Pline3D([
    [Plant_Origin[0] - L_SedUpflow - T_SedWeir; Plant_Origin[1]; Plant_Origin[2]] + [0 m; 0 m; -OD(ND_SedJetReverser)];
    [Plant_Origin[0] - L_SedUpflow - T_SedWeir; Plant_Origin[1]; Plant_Origin[2]] + [0 m; W_Sed; -OD(ND_SedJetReverser)];
    [Plant_Origin[0] - L_SedUpflow - T_SedWeir; Plant_Origin[1]; Plant_Origin[2]] + [0 m; W_Sed; Z_SedHopperSideSlope];
    [Plant_Origin[0] - L_SedUpflow - T_SedWeir; Plant_Origin[1]; Plant_Origin[2]] + [0 m; W_Sed/2 + OR(ND_SedHopperDrain); Z_SedHopperBottom];
    [Plant_Origin[0] - L_SedUpflow - T_SedWeir; Plant_Origin[1]; Plant_Origin[2]] + [0 m; W_Sed/2 - OR(ND_SedHopperDrain); Z_SedHopperBottom];
    [Plant_Origin[0] - L_SedUpflow - T_SedWeir; Plant_Origin[1]; Plant_Origin[2]] + [0 m; 0 m; Z_SedHopperSideSlope];
    [Plant_Origin[0] - L_SedUpflow - T_SedWeir; Plant_Origin[1]; Plant_Origin[2]] + [0 m; 0 m; -OD(ND_SedJetReverser)]
])
ExtrudeSedHopperSides := ExtrudeLast(-L_SedHopper)
SedHopperScript := stack(SedHopperFrontBackPline, ExtrudeSedHopperFrontBack, SedHopperSidePline, ExtrudeSedHopperSides)
# West corner wedge
# Note: east corner wedge is drawn after the jet reverser is finished because we don't want the jet reverser to subtract out of it.
SedWestCornerWedge := WedgeF(Plant_Origin + [-L_SedUpflow; 0 m; -OR(ND_SedJetReverser)], Plant_Origin + [
    Plant_Origin[0] - L_SedUpflow + L_FlocWeirToDiffuserGap;
    Plant_Origin[1] + W_Sed;
    Z_SedManifoldPipe - OR_Fitting(ND_SedManifold)
], [0; 0; 0]*deg)
SedConScript := stack(SedTankLayer, SedConScript1, SedConScript2, SedChannelScript, SedHopperScript, SedWestCornerWedge, SedTankFrz, ChannelWallCutout1, ChannelWallCutout2, GroupDelete, SubtractFromSedTank)
# Jet reverser and sludge drain
# Origins and Dimensions
SedJetReverser_Origin := Plant_Origin + [0 m; W_Sed/2; -OR(ND_SedJetReverser)]
# the ten centimeters to ensure you can wrap your hand between two valves
L_SedJetReverserPipe := L_Sed + T_PlantWall + 2*MaleAdapterLength(ND_SedHopperDrain) + ValveLength(ND_SedHopperDrain) + SocketDepth(ND_SedHopperDrain) + ElbowRadius(ND_SedHopperDrain) + OR_Fitting(ND_SedHopperDrain)
SedSludgeDrainAdapter1_Origin := SedJetReverser_Origin + [-L_SedJetReverserPipe; 0 m; 0 m]
SedSludgeDrainAdapter2_Origin := SedSludgeDrainAdapter1_Origin + [
    -2*MaleAdapterLength(ND_SedJetReverser) - ValveLength(ND_SedJetReverser) + 2*SocketDepth(ND_SedJetReverser) + 2*ValveSocket(ND_SedJetReverser);
    0 m;
    0 m
]
SedSludgeDrainValve_Origin := SedSludgeDrainAdapter1_Origin + [
    -MaleAdapterLength(ND_SedJetReverser) + SocketDepth(ND_SedJetReverser) + ValveSocket(ND_SedJetReverser);
    0 m;
    0 m
]
SedSludgeDrainElbow_Origin := SedSludgeDrainAdapter2_Origin + [-2*SocketDepth(ND_SedJetReverser); 0 m; 0 m]
# Jet Reverser Pipe
SedJetReverser := PipeSUBF(SedJetReverser_Origin, L_SedJetReverserPipe, [0; 0]*deg, ND_SedJetReverser, SDR_26, ["SedTankCon"])
SedJetReverserCut := BoxF(SedJetReverser_Origin + [0 m; -OR(ND_SedJetReverser); 0 m], SedJetReverser_Origin + [-L_SedUpflow; OR(ND_SedJetReverser); OR(ND_SedJetReverser)], [0; 0; 0]*deg)
SubtractFromSedJetReverser := SubtractF(["SedJetReverserPlu"], "DeleteMe")
SedJetReverserScript := stack(SedJetReverser_Layer, SedJetReverser, SedJetReverserFrz, SedJetReverserCut, GroupDelete, SubtractFromSedJetReverser)
# Sludge Drain Fittings
SedSludgeDrainAdapter1 := MaleAdapterF(SedSludgeDrainAdapter1_Origin, [0; 0]*deg, ND_SedJetReverser, SDR_26)
SedSludgeDrainAdapter2 := MaleAdapterF(SedSludgeDrainAdapter2_Origin, [180; 0]*deg, ND_SedJetReverser, SDR_26)
SedSludgeDrainValve := insertdwg("https://confluence.cornell.edu/download/attachments/173604905/Sed-Scaled-Gate-Valve-Threaded.dwg", SedSludgeDrainValve_Origin, 2*OR(ND_SedJetReverser)/(1.16 m), 2*OR(ND_SedJetReverser)/(1.16 m), 0 deg)
SedSludgeDrainElbow := ElbowF(SedSludgeDrainElbow_Origin, [90; 0; 45]*deg, ND_SedJetReverser, SDR_26)
SedSludgeDrainNipple := PipeF(SedSludgeDrainAdapter2_Origin, 2*SocketDepth(ND_SedJetReverser), [0; 0]*deg, ND_SedJetReverser, SDR_26)
SedSludgeDrainFittingScript := stack(SedAdapterLayer, SedSludgeDrainAdapter1, SedSludgeDrainAdapter2, SedAdapterFrz, SedValveLayer, SedSludgeDrainValve, SedValveFrz, SedFittingLayer, SedSludgeDrainElbow, SedFittingFrz, SedPipeLayer, SedSludgeDrainNipple, SedPipeFrz)
SedSludgeDrainScript := stack(SedJetReverserScript, SedSludgeDrainFittingScript)
# Inlet manifold
# Origins and Dimensions
SedManElbow_Origin := Plant_Origin + [
    -L_Sed + S_Fitting + OR_Fitting(ND_SedManifold);
    W_Sed/2 + L_SedManifoldOffset + ElbowRadius(ND_SedManifold);
    Z_SedManifoldPipe
]
SedManPipe1_Origin := SedManElbow_Origin
L_SedManPipe1 := W_Sed/2 + T_PlantWall - L_SedManifoldOffset - ElbowRadius(ND_SedManifold)
SedManPipe2_Origin := Plant_Origin + [-L_SedUpflow + L_SedManConnectionStub - 1 mm; W_Sed/2 + L_SedManifoldOffset; Z_SedManifoldPipe]
# Subtracted 1mm so that there would be a visible space between the two horizontal pipes to show that they are separate
L_SedManPipe2 := L_SedHopper + T_SedWeir + L_SedManConnectionStub - S_Fitting - OR_Fitting(ND_SedManifold) - ElbowRadius(ND_SedManifold) - 1 mm
SedManPipe3_Origin := Plant_Origin + [
    -CapThickness(ND_SedManifold) - L_SedManifoldPipeFromTankEnd;
    W_Sed/2 + L_SedManifoldOffset;
    Z_SedManifoldPipe
]
L_SedManPipe3 := L_SedUpflow - L_SedManConnectionStub - L_SedManifoldPipeFromTankEnd - CapThickness(ND_SedManifold)
SedManCap_Origin := SedManPipe3_Origin
# Manifold Pipes
SedManPipe1 := PipeSUBF(SedManPipe1_Origin, L_SedManPipe1, [-90; 0]*deg, ND_SedManifold, SDR_26, ["SedTankCon"])
SedManPipe2 := PipeSUBF(SedManPipe2_Origin, L_SedManPipe2, [0; 0]*deg, ND_SedManifold, SDR_26, ["SedTankCon"])
SedManPipe3 := PipeF(SedManPipe3_Origin, L_SedManPipe3, [0; 0]*deg, ND_SedManifold, SDR_26)
SedManPipeScript := stack(SelectSedPipes, SedManPipe1, SedManPipe2, SedManPipe3, SedPipeFrz)
# Manifold Fittings
SedManElbow := ElbowSUBF(SedManElbow_Origin, [180; 0; 0]*deg, ND_SedManifold, SDR_26, ["SedTankCon"])
SedManCap := CapF(SedManCap_Origin, [0; 0; 0]*deg, ND_SedManifold)
SedManFernco := FerncoCouplingF(SedManPipe2_Origin + [L_SedManFirstDiffuserGap + 1 mm; 0 m; 0 m], [0; 0; 0]*deg, ND_SedManifold, L_SedManConnectionStub + L_SedManFirstDiffuserGap)
SedManFittingScript := stack(SelectSedFittings, SedManCap, SedManElbow, SedFittingFrz, SedFerncoLayer, SedManFernco, SedFerncoFrz)
# Manifold Orifices
SedManOrifice := CylinderF(SedManPipe3_Origin + [-L_SedManPipe3 + L_SedManFirstDiffuserGap + OR(ND_SedDiffuser); 0 m; 0 m], OR(ND_SedDiffuser), OR(ND_SedManifold) + zc, [0; 270]*deg)
ArraySedManOrifice := array_all(1, N_SedManifoldPorts, B_SedDiffuser)
# Air Vent Holes (not in stack)
SedManAirVent := CylinderF([
    Plant_Origin[0] - (N_SedAirVents*B_AirVentHoles + L_SedManifoldPipeFromTankEnd + L_SedDiffusersToEnd + CapThickness(ND_SedManifold));
    SedManPipe_Origin[1];
    SedManPipe_Origin[2] + OR(ND_SedManifold) + ND_SedManifold/4
], D_AirVentHoles/2, ND_SedManifold/2, [0; 270]*deg)
ArraySedManAirVent := array_all(1, N_SedAirVents, B_AirVentHoles)
SubtractFromSedPipes := SubtractF(["SedPipePlu"], "DeleteMe")
SubtractFromSedFittings := SubtractF(["SedFittingPlu"], "DeleteMe")
SedManOrificeScript := stack(SedManOrifice, ArraySedManOrifice, GroupDelete, SubtractFromSedPipes, SedManOrifice, ArraySedManOrifice, GroupDelete, SubtractFromSedFittings)
SedManifoldScript := stack(SedManPipeScript, SedManFittingScript, SedManOrificeScript)
# Exit launder
# Origins and Dimensions
SedLaunderPipe1_Origin := Plant_Origin + [
    -L_Sed + S_Fitting + OR_Fitting(ND_SedLaunder);
    -T_PlantWall - SocketDepth(ND_SedLaunder);
    Z_SedLaunder
]
SedLaunderPipe2_Origin := Plant_Origin + [
    -L_Sed + S_Fitting + OR_Fitting(ND_SedLaunder) + ElbowRadius(ND_SedLaunder);
    1/2*W_Sed;
    Z_SedLaunder
]
X_SedLaunderLowEdge := Plant_Origin[0] - SocketDepth(ND_SedLaunder)
L_SedLaunderLow := X_SedLaunderLowEdge - (-L_Sed + S_Fitting + OR_Fitting(ND_SedLaunder) + ElbowRadius(ND_SedLaunder))
SedLaunderCap_Origin := SedLaunderPipe2_Origin + [L_SedLaunderLow; 0 m; 0 m]
SedLaunderElbow_Origin := SedLaunderPipe2_Origin
SedLaunderElbow2_Origin := SedLaunderPipe1_Origin
# Launder Fittings
SedLaunderEndCap := CapF(SedLaunderCap_Origin, [0; 0]*deg, ND_SedLaunder)
SedLaunderElbow := ElbowF(SedLaunderElbow_Origin, [90; 0; 0]*deg, ND_SedLaunder, SDR_26)
SedLaunderElbow2 := ElbowF(SedLaunderElbow2_Origin, [180; 90; 0]*deg, ND_SedLaunder, SDR_26)
SedLaunderFittingScript := stack(SelectSedFittings, SedLaunderEndCap, SedLaunderElbow, SedLaunderElbow2, SedFittingFrz)
# Launder Pipes
SedLaunderPipe1 := PipeSUBF(SedLaunderPipe1_Origin, W_Sed/2 + T_PlantWall - ElbowRadius(ND_SedLaunder), [-90; 0]*deg, ND_SedLaunder, SDR_26, ["SedTankCon"])
SedLaunderPipe2 := PipeF(SedLaunderPipe2_Origin, L_SedLaunderLow, [0; 180]*deg, ND_SedLaunder, SDR_26)
SedLaunderPipeScript := stack(SelectSedPipes, SedLaunderPipe1, SedLaunderPipe2, SedPipeFrz)
# Launder Orifices
SedLaunderOrifice := CylinderF([L_SedLaunder - L_SedLaunderEndToOrifice; 0 m; 0 m] + SedLaunderPipe2_Origin, D_SedLaunderOrifice/2, OR(ND_SedLaunder) + zc, [0; 90]*deg)
ArraySedLaunderOrifices := array_all(1, N_SedLaunderOrifices, -B_SedLaunderOrifice)
SedLaunderOrificeScript := stack(SedLaunderOrifice, ArraySedLaunderOrifices, GroupDelete, SubtractFromSedPipes, SedLaunderOrifice, ArraySedLaunderOrifices, GroupDelete, SubtractFromSedFittings)
SedLaunderScript := stack(SedLaunderFittingScript, SedLaunderPipeScript, SedLaunderOrificeScript)
# Floc hopper drain
# Origins
SedHopperDrainAdapter1_Origin := Plant_Origin + [
    -L_Sed - T_PlantWall - SocketDepth(ND_SedHopperDrain);
    W_Sed/2;
    Z_SedHopperBottom + OR(ND_SedHopperDrain)
]
SedHopperDrainValve_Origin := SedHopperDrainAdapter1_Origin + [
    -MaleAdapterLength(ND_SedHopperDrain) + ValveSocket(ND_SedHopperDrain) + SocketDepth(ND_SedHopperDrain);
    0 m;
    0 m
]
SedHopperDrainAdapter2_Origin := SedHopperDrainValve_Origin + [
    ValveSocket(ND_SedHopperDrain) - ValveLength(ND_SedHopperDrain) + SocketDepth(ND_SedHopperDrain) - MaleAdapterLength(ND_SedHopperDrain);
    0 m;
    0 m
]
SedHopperDrainElbow_Origin := SedHopperDrainAdapter2_Origin + [-2*SocketDepth(ND_SedHopperDrain); 0 m; 0 m]
SedHopperDrainPipe_Origin := [
    Plant_Origin[0] - L_SedUpflow - T_SedWeir - L_SedHopper/2;
    SedHopperDrainAdapter1_Origin[1];
    SedHopperDrainAdapter1_Origin[2]
]
# Hopper Drain Pipes
SedHopperDrainNipple1 := PipeF(SedHopperDrainAdapter1_Origin + [2*SocketDepth(ND_SedHopperDrain); 0; 0], 2*SocketDepth(ND_SedHopperDrain), [0; 0]*deg, ND_SedHopperDrain, SDR_26)
SedHopperDrainNipple2 := PipeF(SedHopperDrainAdapter2_Origin, 2*SocketDepth(ND_SedHopperDrain), [0; 0]*deg, ND_SedHopperDrain, SDR_26)
L_SedHopperDrainPipe := L_SedHopper/2 + T_PlantWall + SocketDepth(ND_SedHopperDrain)
SedHopperDrainPipe := PipeSUBF(SedHopperDrainPipe_Origin, L_SedHopperDrainPipe, [0; 0]*deg, ND_SedHopperDrain, SDR_26, ["SedTankCon"])
SedHopperDrainPipeWedge := WedgeF([0 m; OR(ND_SedHopperDrain); OR(ND_SedHopperDrain)] + SedHopperDrainPipe_Origin, [
    -OD(ND_SedHopperDrain)/tan(AN_SedHopperFrontBackSlope);
    -OR(ND_SedHopperDrain);
    -OR(ND_SedHopperDrain)
] + SedHopperDrainPipe_Origin, [0; 0; 0])
SubtractSedHopperDrainPipeWedge := SubtractF(["SedPipePlu"], "DeleteMe")
SedHopperDrainPipeScript := stack(SelectSedPipes, SedHopperDrainNipple1, SedHopperDrainNipple2, SedHopperDrainPipe, SedPipeFrz, SedHopperDrainPipeWedge, GroupDelete, SubtractSedHopperDrainPipeWedge)
# Hopper Drain Fittings
SedHopperDrainElbow := ElbowF(SedHopperDrainElbow_Origin, [90; 0; 45]*deg, ND_SedHopperDrain, SDR_26)
SedHopperDrainAdapter1 := MaleAdapterF(SedHopperDrainAdapter1_Origin, [0; 0]*deg, ND_SedHopperDrain, SDR_26)
SedHopperDrainAdapter2 := MaleAdapterF(SedHopperDrainAdapter2_Origin, [180; 0]*deg, ND_SedHopperDrain, SDR_26)
SedHopperDrainValve := insertdwg("https://confluence.cornell.edu/download/attachments/173604905/Sed-Scaled-Gate-Valve-Threaded.dwg", SedHopperDrainValve_Origin, 2*OR(ND_SedHopperDrain)/(1.16 m), 2*OR(ND_SedHopperDrain)/(1.16 m), 0 deg)
SedHopperDrainFittingScript := stack(SelectSedFittings, SedFittingFrz, SelectSedValves, SedHopperDrainValve, SedValveFrz, SelectSedAdapters, SedHopperDrainAdapter1, SedHopperDrainAdapter2, SedAdapterFrz, SelectSedFittings, SedHopperDrainElbow, SedFittingFrz)
SedHopperDrainScript := stack(SedHopperDrainPipeScript, SedHopperDrainFittingScript)
# Plate settler support frame
B_SedPlateFrameCrossEst := 0.8 m  # ND_SedPlateFrame
N_SedFrameCrossPipe := max(round((L_Sed - L_SedPlate*cos(AN_SedPlate) + OR(ND_SedPlateFrame) - OR_Fitting(ND_SedPlateFrame))/B_SedPlateFrameCrossEst), 3)
B_SedPlateFrameCross := (L_Sed - L_SedPlate*cos(AN_SedPlate) + OR(ND_SedPlateFrame) - OR_Fitting(ND_SedPlateFrame))/(N_SedFrameCrossPipe - 1)
# Origin points:
SedFrameCentralTee1_Origin := [
    -OR_Fitting(ND_SedPlateFrame) - ShortTeeLength(ND_SedPlateFrame);
    W_Sed/2 - SocketDepth(ND_SedPlateFrame) - TeeLength(ND_SedPlateFrame)/2;
    Z_SedLamellaSupportLedge + OR_Fitting(ND_SedPlateFrame)
]
SedFrameCentralTee2_Origin := SedFrameCentralTee1_Origin + [-B_SedPlateFrameCross + 2*ShortTeeLength(ND_SedPlateFrame); 0 m; 0 m]
SedFrameCentralTee3_Origin := SedFrameCentralTee1_Origin + [-B_SedPlateFrameCross; 2*SocketDepth(ND_SedPlateFrame) + TeeLength(ND_SedPlateFrame); 0 m]
SedFrameCentralTee4_Origin := SedFrameCentralTee1_Origin + [
    -2*B_SedPlateFrameCross + 2*ShortTeeLength(ND_SedPlateFrame);
    2*SocketDepth(ND_SedPlateFrame) + TeeLength(ND_SedPlateFrame);
    0 m
]
SedFrameElbow1_Origin := [
    -OR_Fitting(ND_SedPlateFrame) - ElbowRadius(ND_SedPlateFrame);
    OR_Fitting(ND_SedPlateFrame);
    Z_SedLamellaSupportLedge + OR_Fitting(ND_SedPlateFrame)
]
SedFrameElbow2_Origin := SedFrameElbow1_Origin + [0 m; W_Sed - OD_Fitting(ND_SedPlateFrame); 0 m]
SedFrameElbow3_Origin := SedFrameElbow1_Origin + [-(N_SedFrameCrossPipe - 1)*B_SedPlateFrameCross + 2*ElbowRadius(ND_SedPlateFrame); 0 m; 0 m]
SedFrameElbow4_Origin := SedFrameElbow2_Origin + [-(N_SedFrameCrossPipe - 1)*B_SedPlateFrameCross + 2*ElbowRadius(ND_SedPlateFrame); 0 m; 0 m]
SedFrameSideTee1_Origin := [
    -OR_Fitting(ND_SedPlateFrame) - B_SedPlateFrameCross;
    OR_Fitting(ND_SedPlateFrame) + ShortTeeLength(ND_SedPlateFrame);
    Z_SedLamellaSupportLedge + OR_Fitting(ND_SedPlateFrame)
]
SedFrameSideTee2_Origin := SedFrameSideTee1_Origin + [0 m; W_Sed - OD_Fitting(ND_SedPlateFrame) - 2*ShortTeeLength(ND_SedPlateFrame); 0 m]
SedFrameInnerCrossPipe1_Origin := [
    -OR_Fitting(ND_SedPlateFrame) - B_SedPlateFrameCross;
    OR_Fitting(ND_SedPlateFrame) + ShortTeeLength(ND_SedPlateFrame);
    Z_SedLamellaSupportLedge + OR_Fitting(ND_SedPlateFrame)
]
L_SedFrameInnerCrossPipe1 := W_Sed/2 - OR_Fitting(ND_SedPlateFrame) - ShortTeeLength(ND_SedPlateFrame) - SocketDepth(ND_SedPlateFrame) - TeeLength(ND_SedPlateFrame)
SedFrameInnerCrossPipe2_Origin := SedFrameInnerCrossPipe1_Origin + [
    0 m;
    W_Sed/2 - OR_Fitting(ND_SedPlateFrame) - ShortTeeLength(ND_SedPlateFrame) - SocketDepth(ND_SedPlateFrame);
    0 m
]
SedFrameInnerCrossPipe3_Origin := SedFrameInnerCrossPipe2_Origin + [0 m; 2*SocketDepth(ND_SedPlateFrame) + TeeLength(ND_SedPlateFrame); 0 m]
SedFrameEndCrossPipe1_Origin := SedFrameCentralTee1_Origin + [ShortTeeLength(ND_SedPlateFrame); -TeeLength(ND_SedPlateFrame)/2; 0 m]
L_SedFrameEndCrossPipe1 := W_Sed/2 - OR_Fitting(ND_SedPlateFrame) - ElbowRadius(ND_SedPlateFrame) - SocketDepth(ND_SedPlateFrame) - TeeLength(ND_SedPlateFrame)
SedFrameEndCrossPipe2_Origin := SedFrameEndCrossPipe1_Origin + [0 m; TeeLength(ND_SedPlateFrame); 0 m]
L_SedFrameEndCrossPipe2 := W_Sed/2 - OR_Fitting(ND_SedPlateFrame) - ElbowRadius(ND_SedPlateFrame) + SocketDepth(ND_SedPlateFrame)
# Plate Frame Fittings
SedFrameCentralTee1 := TeeF(SedFrameCentralTee1_Origin, [90; 0; 0]*deg, ND_SedPlateFrame, SDR_26)
SedFrameCentralTee2 := TeeF(SedFrameCentralTee2_Origin, [-90; 0; 0]*deg, ND_SedPlateFrame, SDR_26)
ArrayPlateFrameCentralTees_1and2 := ArrayLast(1, floor(N_SedFrameCrossPipe/2), -2*B_SedPlateFrameCross)
SedFrameCentralTee3 := TeeF(SedFrameCentralTee3_Origin, [90; 0; 0]*deg, ND_SedPlateFrame, SDR_26)
SedFrameCentralTee4 := TeeF(SedFrameCentralTee4_Origin, [-90; 0; 0]*deg, ND_SedPlateFrame, SDR_26)
ArrayPlateFrameCentralTees_3and4 := ArrayLast(1, max(floor((N_SedFrameCrossPipe - 1)/2), 1), -2*B_SedPlateFrameCross)
SedPlateFrameCentralTeeScript := stack(SedPlateFrameFittingsLayer, SedFrameCentralTee1, ArrayPlateFrameCentralTees_1and2, SedFrameCentralTee2, ArrayPlateFrameCentralTees_1and2, SedFrameCentralTee3, ArrayPlateFrameCentralTees_3and4, SedFrameCentralTee4, ArrayPlateFrameCentralTees_3and4)
SedFrameElbow1 := ElbowF(SedFrameElbow1_Origin, [-90; 0; 0]*deg, ND_SedPlateFrame, SDR_26)
SedFrameElbow2 := ElbowF(SedFrameElbow2_Origin, [-90; 0; 180]*deg, ND_SedPlateFrame, SDR_26)
SedFrameElbow3 := ElbowF(SedFrameElbow3_Origin, [90; 0; 180]*deg, ND_SedPlateFrame, SDR_26)
SedFrameElbow4 := ElbowF(SedFrameElbow4_Origin, [90; 0; 0]*deg, ND_SedPlateFrame, SDR_26)
SedPlateFrameElbowScript := stack(SedFrameElbow1, SedFrameElbow2, SedFrameElbow3, SedFrameElbow4)
SedFrameSideTee1 := TeeF(SedFrameSideTee1_Origin, [0; 0; 0]*deg, ND_SedPlateFrame, SDR_26)
SedFrameSideTee2 := TeeF(SedFrameSideTee2_Origin, [180; 0; 0]*deg, ND_SedPlateFrame, SDR_26)
ArrayPlateFrameSideTee := ArrayLast(1, N_SedFrameCrossPipe - 2, -B_SedPlateFrameCross)
SedPlateFrameSideTeeScript := stack(SedFrameSideTee1, ArrayPlateFrameSideTee, SedFrameSideTee2, ArrayPlateFrameSideTee, SedPlateFrameFittingsFrz)
SedPlateFrameFittingScript := stack(SedPlateFrameCentralTeeScript, SedPlateFrameElbowScript, SedPlateFrameSideTeeScript)
# Plate Frame Pipes
SedFrameCentralPipe1 := PipeF(SedFrameCentralTee1_Origin, B_SedPlateFrameCross - 2*ShortTeeLength(ND_SedPlateFrame), [0; 0]*deg, ND_SedPlateFrame, SDR_26)
SedFrameCentralPipe2 := PipeF(SedFrameCentralTee3_Origin, B_SedPlateFrameCross - 2*ShortTeeLength(ND_SedPlateFrame), [0; 0]*deg, ND_SedPlateFrame, SDR_26)
SedFrameSidePipe1 := PipeF(SedFrameElbow1_Origin, B_SedPlateFrameCross - TeeLength(ND_SedPlateFrame)/2 - ElbowRadius(ND_SedPlateFrame), [0; 0]*deg, ND_SedPlateFrame, SDR_26)
SedFrameSidePipe2 := PipeF(SedFrameElbow2_Origin, B_SedPlateFrameCross - TeeLength(ND_SedPlateFrame)/2 - ElbowRadius(ND_SedPlateFrame), [0; 0]*deg, ND_SedPlateFrame, SDR_26)
ArraySedSidePipe1and2 := ArrayLast(1, 2, -B_SedPlateFrameCross*(N_SedFrameCrossPipe - 2) - TeeLength(ND_SedPlateFrame)/2 + ElbowRadius(ND_SedPlateFrame))
SedFrameSidePipe3 := PipeF(SedFrameElbow1_Origin + [-B_SedPlateFrameCross - TeeLength(ND_SedPlateFrame)/2 + ElbowRadius(ND_SedPlateFrame); 0 m; 0 m], B_SedPlateFrameCross - TeeLength(ND_SedPlateFrame), [0; 0]*deg, ND_SedPlateFrame, SDR_26)
SedFrameSidePipe4 := PipeF(SedFrameElbow2_Origin + [-B_SedPlateFrameCross - TeeLength(ND_SedPlateFrame)/2 + ElbowRadius(ND_SedPlateFrame); 0 m; 0 m], B_SedPlateFrameCross - TeeLength(ND_SedPlateFrame), [0; 0]*deg, ND_SedPlateFrame, SDR_26)
ArraySedSidePipe3and4 := ArrayLast(1, N_SedFrameCrossPipe - 3, -B_SedPlateFrameCross)
SedFrameInnerCrossPipe1 := PipeF(SedFrameInnerCrossPipe1_Origin, L_SedFrameInnerCrossPipe1, [-90; 0]*deg, ND_SedPlateFrame, SDR_26)
SedFrameInnerCrossPipe2 := PipeF(SedFrameInnerCrossPipe2_Origin, 2*SocketDepth(ND_SedPlateFrame), [-90; 0]*deg, ND_SedPlateFrame, SDR_26)
SedFrameInnerCrossPipe3 := PipeF(SedFrameInnerCrossPipe3_Origin, L_SedFrameInnerCrossPipe1, [-90; 0]*deg, ND_SedPlateFrame, SDR_26)
SedFrameEndCrossPipe1 := PipeF(SedFrameEndCrossPipe1_Origin, L_SedFrameEndCrossPipe1, [90; 0]*deg, ND_SedPlateFrame, SDR_26)
MirrorLast(p1, p2, Erase)
SedFrameEndCrossPipe2 := PipeF(SedFrameEndCrossPipe2_Origin, L_SedFrameEndCrossPipe2, [-90; 0]*deg, ND_SedPlateFrame, SDR_26)
ArrayEndCrossPipes :=
    ArrayLast(1, 2, -B_SedPlateFrameCross*(N_SedFrameCrossPipe - 1)) if mod(N_SedFrameCrossPipe, 2) == 0
    stack(ArrayLast(1, 2, -B_SedPlateFrameCross*(N_SedFrameCrossPipe - 1)), MirrorLast([-zc; W_Sed/2], [0 m; W_Sed/2], "y")) otherwise
SedFramePipeScript1 := stack(SedPlateFramePipesLayer, SedFrameCentralPipe1, ArrayPlateFrameCentralTees_1and2, SedFrameCentralPipe2, ArrayPlateFrameCentralTees_3and4, SedFrameSidePipe1, ArraySedSidePipe1and2, SedFrameSidePipe2, ArraySedSidePipe1and2)
SedFramePipeScript2 := stack(SedFrameSidePipe3, ArraySedSidePipe3and4, SedFrameSidePipe4, ArraySedSidePipe3and4)
SedFramePipeScript3 := stack(SedFrameInnerCrossPipe1, ArrayPlateFrameSideTee, SedFrameInnerCrossPipe2, ArrayPlateFrameSideTee, SedFrameInnerCrossPipe3, ArrayPlateFrameSideTee)
SedFramePipeScript4 := stack(SedFrameEndCrossPipe1, SedFrameEndCrossPipe2, SedFrameEndCrossPipe1, ArrayEndCrossPipes, SedFrameEndCrossPipe2, ArrayEndCrossPipes, SedPlateFramePipesFrz)
SedFramePipeScript :=
    stack(SedFramePipeScript1, SedFramePipeScript2, SedFramePipeScript3, SedFramePipeScript4) if N_SedFrameCrossPipe > 3
    stack(SedFramePipeScript1, SedFramePipeScript3, SedFramePipeScript4) otherwise
SedPlateFrameScript := stack(SedPlateFrameFittingScript, SedFramePipeScript)
# Array sed tanks
ThawSed := ThawMultiple(["Sed*"])
ArraySed := array_all(N_SedTanks, 1, W_Sed + T_SedDividingWall)
FreezeSed := FreezeMultiple(["Sed*"])
ArraySedScript := stack(ThawSed, ArraySed, FreezeSed)
# Finish inlet and exit channels and end walls
# Finish tank walls
SedSouthWallThicken := BoxF(Plant_Origin + [T_SedWall; -T_SedWall; -OR(ND_SedJetReverser) - T_SedDividingWall], Plant_Origin + [-L_Sed - T_SedWall; 0 m; Z_SedTop], [0; 0; 0]*deg)
SedNorthWallThicken := BoxF(Plant_Origin + [
    T_SedWall;
    N_SedTanks*W_Sed + (N_SedTanks - 1)*T_SedDividingWall;
    -OR(ND_SedJetReverser) - T_SedDividingWall
], Plant_Origin + [-L_Sed - T_SedWall; N_SedTanks*W_Sed + (N_SedTanks - 1)*T_SedDividingWall + T_SedWall; Z_SedTop], [0; 0; 0]*deg)
SedChannelEntranceCut := BoxF(Plant_Origin + [-L_Sed; N_SedTanks*W_Sed + (N_SedTanks - 1)*T_SedDividingWall; Z_SedChannelBottom], Plant_Origin + [
    -L_Sed + W_SedInletChannelPreWeir;
    N_SedTanks*W_Sed + (N_SedTanks - 1)*T_SedDividingWall + T_SedWall;
    Z_SedTop
], [0; 0; 0]*deg)
SedEndWallScript := stack(SelectSedCon, SedSouthWallThicken, SedNorthWallThicken, SedConFrz, SedChannelEntranceCut, GroupDelete, SubtractFromSedTank)
# Channel weirs and dividing wall
SedInletChannelYWeir := BoxF(Plant_Origin + [
    -L_Sed + W_SedInletChannelPreWeir;
    W_Sed/2 + L_SedManifoldOffset - OR_Fitting(ND_SedManifold) - S_Fitting/2;
    Z_SedChannelBottom
], Plant_Origin + [
    -L_Sed + W_SedInletChannelPreWeir + T_SedWeir;
    W_Sed*N_SedTanks + T_SedDividingWall*(N_SedTanks - 1);
    Z_SedChannelBottom + H_SedWeirInlet
], [0; 0; 0]*deg)
SedInletChannelXWeir := BoxF(Plant_Origin + [
    -L_Sed + W_SedInletChannelPreWeir + T_SedWeir;
    W_Sed/2 + L_SedManifoldOffset - OR_Fitting(ND_SedManifold) - S_Fitting/2;
    Z_SedChannelBottom
], Plant_Origin + [
    -L_Sed;
    W_Sed/2 + L_SedManifoldOffset - OR_Fitting(ND_SedManifold) - S_Fitting/2 - T_SedWeir;
    Z_SedChannelBottom + H_SedWeirInlet
], [0; 0; 0]*deg)
SedChannelDivider := BoxF(Plant_Origin + [-L_Sed + W_SedInletChannel; 0 m; Z_SedChannelBottom], Plant_Origin + [
    -L_Sed + W_SedInletChannel + T_SedWeir;
    N_SedTanks*W_Sed + (N_SedTanks - 1)*T_SedDividingWall;
    Z_SedChannelBottom + H_SedInletChannel
], [0; 0; 0]*deg)
SedExitChannelWeirY := BoxF(Plant_Origin + [-L_Sed + W_SedInletChannel + T_SedWeir + W_SedExitChannelPostWeir; 0 m; Z_SedChannelBottom], Plant_Origin + [
    -L_Sed + W_SedInletChannel + 2*T_SedWeir + W_SedExitChannelPostWeir;
    N_SedTanks*W_Sed + (N_SedTanks - 1)*T_SedDividingWall;
    Z_SedChannelBottom + H_SedWeirExit
], [0; 0; 0]*deg)
DrainPipeBox := BoxF([
    Plant_Origin[0] - L_Sed + W_SedInletChannelPreWeir + T_SedWeir;
    Plant_Origin[1] + 2*S_Fitting + OD_Fitting(ND_SedChannelDrain);
    Plant_Origin[2] + Z_SedChannelBottom
], [Plant_Origin[0] - L_Sed; Plant_Origin[1]; Plant_Origin[2]], [0; 0; 0]*deg)
SedChannelWeirScript := stack(SedInletChannelYWeir, SedInletChannelXWeir, SedChannelDivider, SedExitChannelWeirY, DrainPipeBox)
# Inlet manifold slope
SedIChanSlopes :=
    local ← view("t")
    for i ∈ 1 .. N_SedTanks - 1
        FlatBox ← BoxF(Plant_Origin + [
            -L_Sed;
            W_Sed/2 + L_SedManifoldOffset - OR_Fitting(ND_SedManifold) - S_Fitting/2 + (W_Sed + T_SedDividingWall)*(i - 1);
            Z_SedChannelBottom
        ], Plant_Origin + [
            -L_Sed + W_SedInletChannelPreWeir;
            W_Sed/2 + L_SedManifoldOffset + OR_Fitting(ND_SedManifold) + S_Fitting/2 + (W_Sed + T_SedDividingWall)*(i - 1);
            Z_SedChannelBottom + (N_SedTanks - i)*H_SedIChanStep
        ], [0; 0; 0]*deg)
        Wedge ← WedgeF(Plant_Origin + [
            -L_Sed + W_SedInletChannelPreWeir;
            W_Sed/2 + L_SedManifoldOffset + OR_Fitting(ND_SedManifold) + S_Fitting/2 + (W_Sed + T_SedDividingWall)*(i - 1);
            Z_SedChannelBottom + (N_SedTanks - i - 1)*H_SedIChanStep
        ], Plant_Origin + [
            -L_Sed + W_SedInletChannelPreWeir + L_SedIChanSlopes;
            W_Sed/2 + L_SedManifoldOffset + OR_Fitting(ND_SedManifold) + S_Fitting/2 + (W_Sed + T_SedDividingWall)*(i - 1) + W_SedInletChannelPreWeir;
            Z_SedChannelBottom + (N_SedTanks - i)*H_SedIChanStep
        ], [90; 0; 0]*deg)
        BaseBox ← BoxF(Plant_Origin + [
            -L_Sed;
            W_Sed/2 + L_SedManifoldOffset + OR_Fitting(ND_SedManifold) + S_Fitting/2 + (W_Sed + T_SedDividingWall)*(i - 1);
            Z_SedChannelBottom
        ], Plant_Origin + [
            -L_Sed + W_SedInletChannelPreWeir;
            W_Sed/2 + L_SedManifoldOffset + OR_Fitting(ND_SedManifold) + S_Fitting/2 + (W_Sed + T_SedDividingWall)*(i - 1) + L_SedIChanSlopes;
            Z_SedChannelBottom + (N_SedTanks - i - 1)*H_SedIChanStep
        ], [0; 0; 0]*deg)
        local ←
            stack(local, FlatBox, Wedge, BaseBox) if i ≠ N_SedTanks - 1
            stack(local, FlatBox, Wedge) otherwise
    return local
UnionSedCon := stack(SelectSedCon, BrepAll, Union_All, SedConFrz)
FinishSedChannelScript := stack(SedEndWallScript, SelectSedCon, SedChannelWeirScript, SedIChanSlopes, UnionSedCon, SedConFrz)
# Finish inlet manifold
SedManVertPipes :=
    local ← SelectSedPipes
    for i ∈ 1 .. N_SedTanks
        VertPipe ← PipeSUBF(Plant_Origin + [
            -L_Sed + S_Fitting + OR_Fitting(ND_SedManifold);
            W_Sed/2 + L_SedManifoldOffset + (W_Sed + T_SedDividingWall)*(i - 1);
            Z_SedChannelBottom + H_SedIChanStep*(N_SedTanks - i) - CouplingLength(ND_SedManifold) + SocketDepth(ND_SedManifold)
        ], Z_SedChannelBottom + H_SedIChanStep*(N_SedTanks - i) - Z_SedManifoldPipe - ElbowRadius(ND_SedManifold) - CouplingLength(ND_SedManifold) + SocketDepth(ND_SedManifold), [0; -90]*deg, ND_SedManifold, PS_SedMan, ["SedTankCon"])
        local ← stack(local, VertPipe)
    local ← stack(local, SedPipeFrz)
    return local
SedManCouplings :=
    local ← SelectSedFittings
    for i ∈ 1 .. N_SedTanks
        Coupling ← CouplingSUBF(Plant_Origin + [
            -L_Sed + S_Fitting + OR_Fitting(ND_SedManifold);
            W_Sed/2 + L_SedManifoldOffset + (W_Sed + T_SedDividingWall)*(i - 1);
            Z_SedChannelBottom + H_SedIChanStep*(N_SedTanks - i) - SocketDepth(ND_SedManifold) + 0.0001 m
        ], [0; -90]*deg, ND_SedManifold, PS_SedMan, ["SedTankCon"])
        local ← stack(local, Coupling)
    local ← stack(local, SedFittingFrz)
    return local
FinishSedManifoldScript := stack(SedManVertPipes, SedManCouplings)
# Lamella
# Origins and Dimensions
Lamina_Origin := Plant_Origin + [-T_SedPlate*sin(AN_SedPlate); 0 m; Z_SedLamellaBottom]
SedModCap_Origin := Lamina_Origin + [
    -S_SedLaminaPipeToEdge*cos(AN_SedPlate) - N_SedModPlates*(S_SedPlate + T_SedPlate)*cos(AN_SedPlate)/tan(AN_SedPlate) + (T_SedPlate + CapHeight(ND_SedMod) - CapThickness(ND_SedMod))*sin(AN_SedPlate) - OR(ND_SedMod)*cos(AN_SedPlate);
    S_SedLaminaPipeToEdge + OR(ND_SedMod);
    S_SedLaminaPipeToEdge*sin(AN_SedPlate) + (N_SedModPlates*S_SedPlate + (N_SedModPlates + 1)*T_SedPlate + CapHeight(ND_SedMod) - CapThickness(ND_SedMod))*cos(AN_SedPlate) + OR(ND_SedMod)*sin(AN_SedPlate)
]
SedModMirrorLineX := (SedModCap_Origin[0] - (CapHeight(ND_SedMod) - CapThickness(ND_SedMod))*sin(AN_SedPlate) - (L_SedPlate - S_SedLaminaPipeToEdge - OR(ND_SedMod))*cos(AN_SedPlate))/2 = -0.156177 m
SedModMirrorLineZ := ((Z_SedLamellaBottom + T_SedPlate*cos(AN_SedPlate) + (L_SedPlate - S_SedLaminaPipeToEdge - OR(ND_SedMod))*sin(AN_SedPlate)) + (SedModCap_Origin[2] - (CapHeight(ND_SedMod) - CapThickness(ND_SedMod))*cos(AN_SedPlate)))/2
# Lamella
MakeSedLamina := BoxF(Lamina_Origin, Lamina_Origin + [T_SedPlate; W_Sed; L_SedPlate], [0; -90 deg + AN_SedPlate; 0])
ArraySedLamina := ArrayLast(1, N_SedModPlates, -B_SedPlate/sin(AN_SedPlate))
SedLaminaScript := stack(SedLaminaLayer, MakeSedLamina, ArraySedLamina, SedLaminaFrz)
# Module Connector Caps
SedModCapRight := CapF(SedModCap_Origin, [0; 0; 0], ND_SedMod)
SedModCapLeft := CapF(SedModCap_Origin - [
    B_SedPlate*(N_SedModPlates - 1) + T_SedPlate + 2*(CapHeight(ND_SedMod) - OR_Fitting(ND_SedMod) + OR(ND_SedMod));
    0 m;
    0 m
], [0; 180 deg; 0], ND_SedMod)
SedModCapScript := stack(SedModCapLayer, SedModCapRight, SedModCapLeft, SedModCapFrz)
# Module Connector Pipes and Spacers
SedModPipe := PipeF(SedModCap_Origin, B_SedPlate*(N_SedModPlates - 1) + T_SedPlate + 2*(CapHeight(ND_SedMod) - OR_Fitting(ND_SedMod) + OR(ND_SedMod)), [0; 0; 0], ND_SedMod, SDR_13.5)
SedModSpacers := PipeF(SedModCap_Origin - [CapHeight(ND_SedMod) + T_SedPlate - CapThickness(ND_SedMod); 0; 0], B_SedPlate - T_SedPlate, [0; 0; 0], ND_SedModSpacer, SDR_17)
ArraySedModSpacers := ArrayLast(1, N_SedModPlates - 1, -B_SedPlate)
SedModPipeScript := stack(SedModPipeLayer, SedModPipe, SedModPipeFrz, SedModSpacerLayer, SedModSpacers, ArraySedModSpacers, SedModSpacerFrz)
# Rotate and Array Connectors and Array Modules
ThawSedModPiping := ThawMultiple(["SedMod*Plu"])
RotateSedModPiping := Rotate_All([SedModCap_Origin[0]; SedModCap_Origin[2]; SedModCap_Origin[1]], 90 deg - AN_SedPlate)
MirrorSedModPipingUp := MirrorAll([SedModMirrorLineX; SedModMirrorLineZ], [SedModMirrorLineX; SedModMirrorLineZ] + [zc; zc/tan(AN_SedPlate)], "n")
TripleSedModPiping := array_all(3, 1, (W_SedPlate - 2*(S_SedLaminaPipeToEdge + OR(ND_SedMod)))/2)
ThawSedModLamella := ThawMultiple(["SedModLamella"])
ArraySedMod := array_all(1, N_SedModules, -B_SedPlate*N_SedModPlates/sin(AN_SedPlate))
FreezeSedModComponents := FreezeMultiple(["SedMod*"])
SedModArrayScript := stack(ThawSedModPiping, view("f"), RotateSedModPiping, MirrorSedModPipingUp, view("t"), TripleSedModPiping, ThawSedModLamella, ArraySedMod, FreezeSedModComponents)
SedLamellaScript := stack(SedLaminaScript, SedModCapScript, SedModPipeScript, SedModArrayScript)
# Inlet manifold diffusers
SedDiffuser_Origin := SedManPipe3_Origin + [
    -L_SedManPipe3 + L_SedManFirstDiffuserGap + OR(ND_SedDiffuser);
    0 m;
    -IR(ND_SedManifold, PS_SedMan)
]
SedDiffOuterCircleSection := circle([SedDiffuser_Origin[0]; SedDiffuser_Origin[1]; SedDiffuser_Origin[2]], OR(ND_SedDiffuser))
SedDiffOuterRectangleSection := Pline3D([
    [
        SedDiffuser_Origin[0] + L_SedDiffuserInner/2 + T_SedDiffuserPvc;
        SedDiffuser_Origin[1] + W_SedDiffuserInner/2 + T_SedDiffuserPvc;
        SedDiffuser_Origin[2] - L_SedManifoldDiffuser
    ];
    [
        SedDiffuser_Origin[0] - L_SedDiffuserInner/2 - T_SedDiffuserPvc;
        SedDiffuser_Origin[1] + W_SedDiffuserInner/2 + T_SedDiffuserPvc;
        SedDiffuser_Origin[2] - L_SedManifoldDiffuser
    ];
    [
        SedDiffuser_Origin[0] - L_SedDiffuserInner/2 - T_SedDiffuserPvc;
        SedDiffuser_Origin[1] - W_SedDiffuserInner/2 - T_SedDiffuserPvc;
        SedDiffuser_Origin[2] - L_SedManifoldDiffuser
    ];
    [
        SedDiffuser_Origin[0] + L_SedDiffuserInner/2 + T_SedDiffuserPvc;
        SedDiffuser_Origin[1] - W_SedDiffuserInner/2 - T_SedDiffuserPvc;
        SedDiffuser_Origin[2] - L_SedManifoldDiffuser
    ];
    [
        SedDiffuser_Origin[0] + L_SedDiffuserInner/2 + T_SedDiffuserPvc;
        SedDiffuser_Origin[1] + W_SedDiffuserInner/2 + T_SedDiffuserPvc;
        SedDiffuser_Origin[2] - L_SedManifoldDiffuser
    ]
])
SedDiffZoomOuter := ZoomWindow([SedDiffuser_Origin[0] - L_SedDiffuserInner; SedDiffuser_Origin[1] + W_SedDiffuserInner], [SedDiffuser_Origin[0] + L_SedDiffuserInner; SedDiffuser_Origin[1] - W_SedDiffuserInner])
SedDiffOuterLoft := Loft([SedDiffuser_Origin[0] + OR(ND_SedDiffuser); SedDiffuser_Origin[1]; SedDiffuser_Origin[2]], [
    SedDiffuser_Origin[0] + L_SedDiffuserInner/2 + T_SedDiffuserPvc;
    SedDiffuser_Origin[1] + W_SedDiffuserInner/2 + T_SedDiffuserPvc;
    SedDiffuser_Origin[2] - L_SedManifoldDiffuser
])
SedDiffInnerCircleSection := circle([SedDiffuser_Origin[0]; SedDiffuser_Origin[1]; SedDiffuser_Origin[2]], IR(ND_SedDiffuser, PS_SedDiffuser))
SedDiffInnerRectangleSection := Pline3D([
    [
        SedDiffuser_Origin[0] + L_SedDiffuserInner/2;
        SedDiffuser_Origin[1] + W_SedDiffuserInner/2;
        SedDiffuser_Origin[2] - L_SedManifoldDiffuser
    ];
    [
        SedDiffuser_Origin[0] - L_SedDiffuserInner/2;
        SedDiffuser_Origin[1] + W_SedDiffuserInner/2;
        SedDiffuser_Origin[2] - L_SedManifoldDiffuser
    ];
    [
        SedDiffuser_Origin[0] - L_SedDiffuserInner/2;
        SedDiffuser_Origin[1] - W_SedDiffuserInner/2;
        SedDiffuser_Origin[2] - L_SedManifoldDiffuser
    ];
    [
        SedDiffuser_Origin[0] + L_SedDiffuserInner/2;
        SedDiffuser_Origin[1] - W_SedDiffuserInner/2;
        SedDiffuser_Origin[2] - L_SedManifoldDiffuser
    ];
    [
        SedDiffuser_Origin[0] + L_SedDiffuserInner/2;
        SedDiffuser_Origin[1] + W_SedDiffuserInner/2;
        SedDiffuser_Origin[2] - L_SedManifoldDiffuser
    ]
])
SedDiffZoomInner := ZoomWindow([SedDiffuser_Origin[0] - L_SedDiffuserInner; SedDiffuser_Origin[1] + W_SedDiffuserInner], [SedDiffuser_Origin[0] + L_SedDiffuserInner; SedDiffuser_Origin[1] - W_SedDiffuserInner])
SedDiffInnerLoft := Loft([
    SedDiffuser_Origin[0] + IR(ND_SedDiffuser, PS_SedDiffuser);
    SedDiffuser_Origin[1];
    SedDiffuser_Origin[2]
], [
    SedDiffuser_Origin[0] + L_SedDiffuserInner/2;
    SedDiffuser_Origin[1] + W_SedDiffuserInner/2;
    SedDiffuser_Origin[2] - L_SedManifoldDiffuser
])
SedDiffArray := Array_All(1, N_SedManifoldPorts, B_SedDiffuser)
SedDiffuserScript := stack(SedDiffuserLayer, SedDiffOuterCircleSection, SedDiffOuterRectangleSection, SedDiffZoomOuter, SedDiffOuterLoft, SedDiffuserFreeze, SedDiffInnerCircleSection, SedDiffInnerRectangleSection, SedDiffZoomInner, SedDiffInnerLoft, GroupDelete, SubtractFromSedDiffuser, SelectSedDiffuser, SedDiffArray, SedDiffuserFreeze)
# Inlet channel drain
# Origins and dimensions
SedIChannelDrainVertCoupling_Origin := Plant_Origin + [
    -L_Sed - T_SedWall + max(T_SedWall + S_Fitting + OR_Fitting(ND_SedChannelDrain), SocketDepth(ND_SedChannelDrain) + TeeLength(ND_SedChannelDrain)/2);
    S_Fitting + OR_Fitting(ND_SedChannelDrain);
    Z_SedChannelBottom - CouplingLength(ND_SedChannelDrain) + SocketDepth(ND_SedChannelDrain) + 0.0001 m
]
L_SedIChannelVertPipe := Z_SedChannelBottom + OR(ND_SedChannelDrain) - CouplingLength(ND_SedChannelDrain) + SocketDepth(ND_SedChannelDrain) - ShortTeeLength(ND_SedChannelDrain)
L_SedIChannelHorizPipe := SedIChannelDrainVertCoupling_Origin[0] - (Plant_Origin[0] - L_Sed - T_SedWall) - TeeLength(ND_SedChannelDrain)/2
# Inlet channel drain fittings
SedIChannelDrainVertCoupling := CouplingSUBF(SedIChannelDrainVertCoupling_Origin, [0; 90; 0]*deg, ND_SedChannelDrain, PS_SedChannelDrain, ["SedTankCon"])
SedIChannelDrainTee := TeeSUBF(SedIChannelDrainVertCoupling_Origin + [0 m; 0 m; -L_SedIChannelVertPipe], [0; 0; 90]*deg, ND_SedChannelDrain, PS_SedChannelDrain, ["SedTankCon"])
SedInletChannelDrainFittingScript := stack(SelectSedFittings, SedIChannelDrainVertCoupling, SedIChannelDrainTee, SedFittingFrz)
# Inlet channel drain pipes
SedIChannelDrainHorizPipe := PipeSUBF(SedIChannelDrainVertCoupling_Origin + [-TeeLength(ND_SedChannelDrain)/2; 0; -L_SedIChannelVertPipe - ShortTeeLength(ND_SedChannelDrain)], L_SedIChannelHorizPipe, [0; 0; 0]*deg, ND_SedChannelDrain, PS_SedChannelDrain, ["SedTankCon"])
SedIChannelDrainVertPipe := PipeSUBF(SedIChannelDrainVertCoupling_Origin, L_SedIChannelVertPipe, [0; 270; 0]*deg, ND_SedChannelDrain, PS_SedChannelDrain, ["SedTankCon"])
SedIChannelDrainStub := PipeF(SedIChannelDrainVertCoupling_Origin + [0 m; 0 m; CouplingLength(ND_SedChannelDrain) - 2*SocketDepth(ND_SedChannelDrain)], H_SedInletChannel + SocketDepth(ND_SedChannelDrain), [0; 90; 0]*deg, ND_SedChannelDrain, PS_SedChannelDrain)
SedInletChannelDrainPipeScript := stack(SelectSedPipes, SedIChannelDrainHorizPipe, SedIChannelDrainVertPipe, SedPipeFrz, SedInletDrainRemovables, SedIChannelDrainStub, SedInletDrainRemovablesFrz)
SedInletDrainScript := stack(SedInletChannelDrainFittingScript, SedInletChannelDrainPipeScript)
# Origins and dimensions
SedEChannelDrainVertCoupling_Origin := Plant_Origin + [
    -L_Sed + W_SedInletChannel + T_SedWeir + W_SedExitChannelPostWeir/2;
    S_Fitting + OR_Fitting(ND_SedChannelDrain);
    Z_SedChannelBottom - CouplingLength(ND_SedChannelDrain) + SocketDepth(ND_SedChannelDrain)
]
L_SedEChannelVertPipe := Z_SedChannelBottom + OR(ND_SedChannelDrain) - CouplingLength(ND_SedChannelDrain) + SocketDepth(ND_SedChannelDrain) - ElbowRadius(ND_SedChannelDrain)
L_SedEChannelHorizPipe := SedEChannelDrainVertCoupling_Origin[0] - SedIChannelDrainVertCoupling_Origin[0] - TeeLength(ND_SedChannelDrain)/2 - ElbowRadius(ND_SedChannelDrain)
# Exit channel drain fittings
SedEChannelDrainVertCoupling := CouplingSUBF(SedEChannelDrainVertCoupling_Origin, [0; 90; 0]*deg, ND_SedChannelDrain, PS_SedChannelDrain, ["SedTankCon"])
SedEChannelDrainElbow := ElbowSUBF(SedEChannelDrainVertCoupling_Origin + [0 m; 0 m; -L_SedEChannelVertPipe], [0; 0; 270]*deg, ND_SedChannelDrain, PS_SedChannelDrain, ["SedTankCon"])
SedExitChannelDrainFittingScript := stack(SelectSedFittings, SedEChannelDrainVertCoupling, SedEChannelDrainElbow, SedFittingFrz)
# Exit channel drain pipes
SedEChannelDrainHorizPipe := PipeSUBF(SedEChannelDrainVertCoupling_Origin + [-ElbowRadius(ND_SedChannelDrain); 0; -L_SedEChannelVertPipe - ElbowRadius(ND_SedChannelDrain)], L_SedEChannelHorizPipe, [0; 0; 0]*deg, ND_SedChannelDrain, PS_SedChannelDrain, ["SedTankCon"])
SedEChannelDrainVertPipe := PipeSUBF(SedEChannelDrainVertCoupling_Origin, L_SedEChannelVertPipe, [0; 270; 0]*deg, ND_SedChannelDrain, PS_SedChannelDrain, ["SedTankCon"])
SedEChannelDrainStub := PipeF(SedEChannelDrainVertCoupling_Origin, H_SedInletChannel + SocketDepth(ND_SedChannelDrain), [0; 90; 0]*deg, ND_SedChannelDrain, PS_SedChannelDrain)
SedExitChannelDrainPipeScript := stack(SelectSedPipes, SedEChannelDrainHorizPipe, SedEChannelDrainVertPipe, SedPipeFrz, SedExitDrainRemovables, SedEChannelDrainStub, SedExitDrainRemovablesFrz)
SedExitDrainScript := stack(SedExitChannelDrainFittingScript, SedExitChannelDrainPipeScript)
# Exit channel drain
# Outlets to filter
# this part is red in the normal AC tank code as well
# Origins and dimensions
SedOutletCoupling_Origin(N) := Plant_Origin + [
    -L_Sed + W_SedInletChannel + T_SedWeir + W_SedExitChannelPostWeir/2;
    W_Sed - 2*S_Fitting - OR_Fitting(ND_SedToFiPipe);
    Z_SedChannelBottom - SocketDepth(ND_SedToFiPipe)
] + [
    0 m;
    (W_Sed + T_SedDividingWall)*(2*N - 2)*(N_Fi > 2) + (W_Sed + T_SedDividingWall)*(N - 1)*(N_Fi == 2);
    0 m
]
SedOutletElbow_Origin(N) := [
    SedOutletCoupling_Origin(N)[0];
    SedOutletCoupling_Origin(N)[1];
    Z_FiInletChannelBottom - SocketDepth(ND_SedToFiPipe)
]
SedOutletVertPipe_Origin(N) := SedOutletCoupling_Origin(N) + [0; 0; 2*SocketDepth(ND_SedToFiPipe) - CouplingLength(ND_SedToFiPipe)]
L_SedOutletVertPipe := SedOutletCoupling_Origin(1)[2] - SedOutletElbow_Origin(1)[2] - CouplingLength(ND_SedToFiPipe) + 2*SocketDepth(ND_SedToFiPipe)
SedOutletHorizPipe_Origin(N) := SedOutletElbow_Origin(N) + [-ElbowRadius(ND_SedToFiPipe); 0; -ElbowRadius(ND_SedToFiPipe)]
L_SedOutletHorizPipe := SocketDepth(ND_SedToFiPipe) + T_FiBoxWall + W_DCWalkway + T_SedWall + W_SedInletChannel + T_SedWeir + W_SedExitChannelPostWeir/2 - ElbowRadius(ND_SedToFiPipe)
# Sed outlet fittings
SedOutletCouplingScript :=
    Local ← SelectSedFittings
    for i ∈ 1 .. N_SedToFiPipes
        OutletCoupling ← CouplingSUBF(SedOutletCoupling_Origin(i), [0; 270]*deg, ND_SedToFiPipe, PS_SedToFiPipe, ["SedTankCon"])
        Local ← stack(Local, OutletCoupling)
    Local ← stack(Local, SedFittingFrz)
    return Local
SedOutletElbowScript :=
    Local ← SelectSedFittings
    for i ∈ 1 .. N_SedToFiPipes
        OutletElbow ← ElbowSUBF(SedOutletElbow_Origin(i), [0; 0; 270]*deg, ND_SedToFiPipe, PS_SedToFiPipe, ["SedTankCon"])
        Local ← stack(Local, OutletElbow)
    Local ← stack(Local, SedFittingFrz)
    return Local
# Sed outlet pipes
SedOutletVertPipeScript :=
    Local ← SelectSedPipes
    for i ∈ 1 .. N_SedToFiPipes
        OutletPipe ← PipeSUBF(SedOutletVertPipe_Origin(i), L_SedOutletVertPipe, [0; 270]*deg, ND_SedToFiPipe, PS_SedToFiPipe, ["SedTankCon"])
        Local ← stack(Local, OutletPipe)
    Local ← stack(Local, SedPipeFrz)
    return Local
SedOutletHorizPipeScript :=
    Local ← SedToFiPipeLayer
    for i ∈ 1 .. N_SedToFiPipes
        OutletPipe ← PipeSUBF(SedOutletHorizPipe_Origin(i), L_SedOutletHorizPipe, [0; 0]*deg, ND_SedToFiPipe, PS_SedToFiPipe, ["SedTankCon"])
        Local ← stack(Local, OutletPipe)
    Local ← stack(Local, SedToFiPipeFrz)
    return Local
SedOutletScript := stack(SedOutletCouplingScript, SedOutletElbowScript, SedOutletVertPipeScript, SedOutletHorizPipeScript)
# Inlet manifold diffusers
SedManOrifice := CylinderF(SedManPipe3_Origin + [-L_SedManPipe3 + L_SedManFirstDiffuserGap + OR(ND_SedDiffuser); 0 m; 0 m], OR(ND_SedDiffuser), OR(ND_SedManifold) + zc, [0; 270]*deg)
ArraySedManOrifice := array_all(1, N_SedManifoldPorts, B_SedDiffuser)
SedDiffuser_Origin := SedManPipe3_Origin + [-L_SedManPipe3 + L_SedManFirstDiffuserGap + OR(ND_SedDiffuser); 0 m; -IR(ND_SedManifold, SDR_26)]
SedDiffOuterCircleSection := circle([SedDiffuser_Origin[0]; SedDiffuser_Origin[1]; SedDiffuser_Origin[2]], OR(ND_SedDiffuser))
SedDiffOuterRectangleSection := Pline3D([
    [
        SedDiffuser_Origin[0] + L_SedDiffuserInner/2 + T_SedDiffuserPvc;
        SedDiffuser_Origin[1] + W_SedDiffuserInner/2 + T_SedDiffuserPvc;
        SedDiffuser_Origin[2] - L_SedManifoldDiffuser
    ];
    [
        SedDiffuser_Origin[0] - L_SedDiffuserInner/2 - T_SedDiffuserPvc;
        SedDiffuser_Origin[1] + W_SedDiffuserInner/2 + T_SedDiffuserPvc;
        SedDiffuser_Origin[2] - L_SedManifoldDiffuser
    ];
    [
        SedDiffuser_Origin[0] - L_SedDiffuserInner/2 - T_SedDiffuserPvc;
        SedDiffuser_Origin[1] - W_SedDiffuserInner/2 - T_SedDiffuserPvc;
        SedDiffuser_Origin[2] - L_SedManifoldDiffuser
    ];
    [
        SedDiffuser_Origin[0] + L_SedDiffuserInner/2 + T_SedDiffuserPvc;
        SedDiffuser_Origin[1] - W_SedDiffuserInner/2 - T_SedDiffuserPvc;
        SedDiffuser_Origin[2] - L_SedManifoldDiffuser
    ];
    [
        SedDiffuser_Origin[0] + L_SedDiffuserInner/2 + T_SedDiffuserPvc;
        SedDiffuser_Origin[1] + W_SedDiffuserInner/2 + T_SedDiffuserPvc;
        SedDiffuser_Origin[2] - L_SedManifoldDiffuser
    ]
])
SedDiffZoomOuter := ZoomWindow([SedDiffuser_Origin[0] - L_SedDiffuserInner; SedDiffuser_Origin[1] + W_SedDiffuserInner], [SedDiffuser_Origin[0] + L_SedDiffuserInner; SedDiffuser_Origin[1] - W_SedDiffuserInner])
SedDiffOuterLoft := Loft([SedDiffuser_Origin[0] + OR(ND_SedDiffuser); SedDiffuser_Origin[1]; SedDiffuser_Origin[2]], [
    SedDiffuser_Origin[0] + L_SedDiffuserInner/2 + T_SedDiffuserPvc;
    SedDiffuser_Origin[1] + W_SedDiffuserInner/2 + T_SedDiffuserPvc;
    SedDiffuser_Origin[2] - L_SedManifoldDiffuser
])
SedDiffInnerCircleSection := circle([SedDiffuser_Origin[0]; SedDiffuser_Origin[1]; SedDiffuser_Origin[2]], IR(ND_SedDiffuser, SDR_26))
SedDiffInnerRectangleSection := Pline3D([
    [
        SedDiffuser_Origin[0] + L_SedDiffuserInner/2;
        SedDiffuser_Origin[1] + W_SedDiffuserInner/2;
        SedDiffuser_Origin[2] - L_SedManifoldDiffuser
    ];
    [
        SedDiffuser_Origin[0] - L_SedDiffuserInner/2;
        SedDiffuser_Origin[1] + W_SedDiffuserInner/2;
        SedDiffuser_Origin[2] - L_SedManifoldDiffuser
    ];
    [
        SedDiffuser_Origin[0] - L_SedDiffuserInner/2;
        SedDiffuser_Origin[1] - W_SedDiffuserInner/2;
        SedDiffuser_Origin[2] - L_SedManifoldDiffuser
    ];
    [
        SedDiffuser_Origin[0] + L_SedDiffuserInner/2;
        SedDiffuser_Origin[1] - W_SedDiffuserInner/2;
        SedDiffuser_Origin[2] - L_SedManifoldDiffuser
    ];
    [
        SedDiffuser_Origin[0] + L_SedDiffuserInner/2;
        SedDiffuser_Origin[1] + W_SedDiffuserInner/2;
        SedDiffuser_Origin[2] - L_SedManifoldDiffuser
    ]
])
SedDiffZoomInner := ZoomWindow([SedDiffuser_Origin[0] - L_SedDiffuserInner; SedDiffuser_Origin[1] + W_SedDiffuserInner], [SedDiffuser_Origin[0] + L_SedDiffuserInner; SedDiffuser_Origin[1] - W_SedDiffuserInner])
SedDiffInnerLoft := Loft([SedDiffuser_Origin[0] + IR(ND_SedDiffuser, SDR_26); SedDiffuser_Origin[1]; SedDiffuser_Origin[2]], [
    SedDiffuser_Origin[0] + L_SedDiffuserInner/2;
    SedDiffuser_Origin[1] + W_SedDiffuserInner/2;
    SedDiffuser_Origin[2] - L_SedManifoldDiffuser
])
SedDiffGroupInner := GroupAll("DeleteMe")
SedDiffSubtract := SubtractF(["SedManDiffuserPlu"], "DeleteMe")
SedDiffArray := Array_All(1, N_SedManifoldPorts, B_SedDiffuser)
SedDiffuserScript := stack(SedDiffuserLayer, SedDiffOuterCircleSection, SedDiffOuterRectangleSection, SedDiffZoomOuter, SedDiffOuterLoft, SedDiffuserFreeze, SedDiffInnerCircleSection, SedDiffInnerRectangleSection, SedDiffZoomInner, SedDiffInnerLoft, SedDiffGroupInner, SedDiffSubtract, SelectSedDiffuser, SedDiffArray, SedDiffuserFreeze)
# Sed surface skimmer
# Origins and Dimensions
H_SkimmerToSurface := 3 cm
SedSkimmerCap_Origin := Plant_Origin + [
    -L_Sed + SocketDepth(ND_SedSkimmer) + ElbowRadius(ND_SedSkimmer);
    ((W_Sed/2 - OR_Fitting(ND_SedLaunder)) - S_Fitting) - OR_Fitting(ND_SedSkimmer);
    ZW_Sed - H_SkimmerToSurface
]
SedSkimmerHorizPipe_Origin := [
    SedSkimmerCap_Origin[0] - ElbowRadius(ND_SedSkimmer);
    SedSkimmerCap_Origin[1];
    Plant_Origin[2] + Z_SedChannelBottom - T_SedChannelWall - OR_Fitting(ND_SedSkimmer)
]
SedSkimmerElbow_Origin := SedSkimmerHorizPipe_Origin + [ElbowRadius(ND_SedSkimmer); 0 m; ElbowRadius(ND_SedSkimmer)]
SedSkimmerVertPipe_Origin := SedSkimmerCap_Origin
SedSkimmerCap := CapF(SedSkimmerCap_Origin, [0; -90]*deg, ND_SedSkimmer)
SedSkimmerElbow := ElbowF(SedSkimmerElbow_Origin, [0; 0; 270]*deg, ND_SedSkimmer, SDR_26)
SedSkimmerFittingsScript := stack(SelectSedFittings, SedSkimmerCap, SedSkimmerElbow, SedFittingFrz)
SedSkimmerVertPipe := PipeF(SedSkimmerVertPipe_Origin, SedSkimmerCap_Origin[2] - SedSkimmerElbow_Origin[2], [0; -90]*deg, ND_SedSkimmer, SDR_26)
SedSkimmerHorizPipe := PipeSUBF(SedSkimmerHorizPipe_Origin, T_PlantWall + SocketDepth(ND_SedSkimmer), [0; 0]*deg, ND_SedSkimmer, SDR_26, ["SedTankCon"])
SedSkimmerPipesScript := stack(SelectSedPipes, SedSkimmerVertPipe, SedSkimmerHorizPipe, SedPipeFrz)
SubtractFromSedJetReverser := SubtractF(["SedJetReverserPlu"], "DeleteMe")
SedSkimmerPlateCut := BoxF(SedSkimmerVertPipe_Origin + [OR(ND_SedSkimmer); OR(ND_SedSkimmer); 0 m], SedSkimmerVertPipe_Origin + [
    -ElbowRadius(ND_SedSkimmer) - SocketDepth(ND_SedSkimmer);
    -OR(ND_SedSkimmer);
    -(SedSkimmerCap_Origin[2] - SedSkimmerElbow_Origin[2])
], [0; 0; 0]*deg)
SubtractFromSedLamella := SubtractF(["SedModLamella"], "DeleteMe")
SedSkimmerScript := stack(SedSkimmerFittingsScript, SedSkimmerPipesScript, SedSkimmerPlateCut, GroupDelete, SubtractFromSedLamella)
# Add water levels
SedWaterLayer := layer_new("SedWater", blue2)
SedWaterBox := BoxF(Plant_Origin, [-L_SedUpflow; W_Sed; HW_Sed] + Plant_Origin, [0; 0; 0]*deg)
SedIChannelWater := BoxF([Plant_Origin[0] - L_Sed; Plant_Origin[1]; Z_SedChannelBottom], [Plant_Origin[0] - L_Sed; Plant_Origin[1]; Z_SedChannelBottom] + [W_SedInletChannelPreWeir + T_SedWeir + W_SedInletChannelPostWeir; W_Sed; HW_SedInletChannel], [0; 0; 0]*deg)
SedEChannelWater := BoxF([
    Plant_Origin[0] - L_Sed + W_SedInletChannel + 2*T_SedWeir + W_SedExitChannelPostWeir;
    Plant_Origin[1];
    Z_SedChannelBottom
], [
    Plant_Origin[0] - L_Sed + W_SedInletChannel + T_SedWeir + W_SedExitChannel;
    Plant_Origin[1] + W_Sed;
    Z_SedChannelBottom + HW_SedExitChannel
], [0; 0; 0]*deg)
SedWaterFrz := FreezeLayer("SedWater")
SedWaterScript := stack(SedWaterLayer, SedWaterBox, SedIChannelWater, SedEChannelWater, SedWaterFrz)
AC_SedTank := stack(SedConScript, SedSludgeDrainScript, SedManifoldScript, SedLaunderScript, SedHopperDrainScript, SedPlateFrameScript, ArraySedScript, FinishSedChannelScript, FinishSedManifoldScript, SedLamellaScript, SedDiffuserScript, SedInletDrainScript, SedExitDrainScript)
# SedOutletScript should be the last thing in this stack
