Q_Plant := 5*L/s
HL_FlocMax := 40 cm
H_SedSlopesToFlocWeirMin := 25 cm
T_FlocSlab := 15 cm
T_SedWall := 15 cm
T_FlocWall := 15 cm
T_FiBoxWall := 15 cm
T_PlantWall := 15 cm
T_PlantFloor := 20 cm
T_ChemSlab := 15 cm
C_CoagDoseMax := 40*mg/L
C_ChlorDoseAve := 1*mg/L
T_SedDividingWall := T_SedWall
T_SedChannelWall := T_SedWall
# [reference: ExpertInputs.xmcd]
# [reference: MathFunctions.xmcd]
# [reference: PipeDatabase.xmcd]
# [reference: MaterialsDatabase.xmcd]
# [reference: FluidsFunctions.xmcd]
# [reference: SedimentationTankpc479.xmcd]
# [reference: LFOM.xmcd]
# [reference: EntranceTankFlocculatorLow.xmcd]
# Low Flow Stacked Rapid Sand Filter
# adapted for a 20" ND filter pipe by Jon Christensen on 3/15/15
# mrf222 march 2016 added 'low' to non unique variables
# Dimensions and pipe sizes
ND_FiPipe := 24 in
ND_FiManTrunkMinLow := 2 in
N_FiManBranchLow := 5  # number of branches on either side
N_FiInletPipesLow := 4
ND_BallValve := 3 in
ND_FiManBranchMinLow := 1 in
N_FiOutletPipesLow := 3
ND_BedTester := 1/2*in
ND_BedTesterOuter := 1 in
ND_FiAirRelValve := 1/2*in
H_FiCap := 3/8*in
H_Shimstock := 1.5 in = 3.81 cm
A_Fi := π*IR(ND_FiPipe, SDR_26)^2
H_Gasket := H_Shimstock + 2 cm = 5.81 cm
T_Gasket := 6 mm
L_FiBallValve := .1625 m
L_FiOuterBulkFitting := .0368 m
# Sand Layer thickness as function of trunk diameter
# round up to the nearest cm to make construction easier
H_FiLayerF(ND_Trunk) := max(H_FiLayerMin, Ceil(OR(ND_Trunk) + S_FiTrunkMin, 1 cm), Ceil(OD_Fitting(ND_Trunk), 1 cm), Ceil(FerncoOuterDiameter(ND_Trunk), 1 cm))
H_FiBottomLayerF(ND_Trunk, ND_BwTrunk) := max(H_FiLayerMin, Ceil(OR(ND_Trunk) + OR(ND_BwTrunk) + S_FiTrunkMin, 1 cm), Ceil(OR_Fitting(ND_Trunk) + OR_Fitting(ND_BwTrunk), 1 cm), Ceil(FerncoOuterDiameter(ND_Trunk)/2 + FerncoOuterDiameter(ND_BwTrunk)/2, 1 cm))
# Flow distribution constraints: ratio of pressure recovery to clean bed head loss
# There are three flow distribution problems in the filter design: distribution between the slots along a manifold branch, distribution between branches along a trunk, and distribution between filter layers. The first two are both addressed by making pressure recovery in the manifold (both trunks and branches) small relative to the short path head loss (head loss through the clean bed, since slot head loss in forward filtration is small). In backwash mode where there is no bed head loss, the pressure recovery in the manifold plumbing must be small relative to slot head loss.
#
# Head loss through the inlet and outlet plumbing differs for different layers both because the number of elbows varies and because the top and bottom inlets have 1/2 the flow of the middle two. Therefore good flow distribution between layers would be addressed by making head loss through the inlet and outlet plumbing small for all layers relative to clean bed head loss. We do not have an explicit constraint set for this, but the constraint on trunk diameter which gives good flow distribution within the manifolds seems to be sufficient to take care of it. As a check, see the analysis under the section "Path Head Loss Calculations and Flow Distribution Between Layers" below.
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Pi_FiManifoldQ := 0.85  # Ratio of long path flow to short path flow
Pi_FiManifoldHeadLoss := 1 - Pi_FiManifoldQ^2 = 0.2775
# Ratio of pressure recovery in the slotted pipes to the head loss through the clean bed (or through the slots in backwash mode)
# Even though the piezometric head profiles for the inlet and outlet manifolds on the middle layers may be parallel meaning that pressure recovery there need not be small for good distribution between sand bed flow paths, we still need pressure recovery to be small in the outlet manifolds in order to get good flow distribution in the top and bottom layers where the velocity in the manifolds is 1/2 and the pressure recovery 1/4 that of other layers (even smaller in the larger-diameter bottom manifold where velocity head is tiny).
# Number of filters, layer thickness
H_FiLayerLow := H_FiLayerF(ND_FiManTrunkMinLow) = 20 cm
Q_FiMax := V_FiBw*A_Fi = 3.07001 L/s
N_Fi := ceil(Q_Plant/Q_FiMax) = 2
# We will have one filter up until the plant flow is the maximum for the filter pipe size, after which we will multiply the filter as needed
# Flow rate calculations
Q_Fi := Q_Plant/N_Fi = 2.5 L/s  # The flow will be divided evenly between the N_Fi = 2 filters.
A_FiActive := A_Fi = 0.279091 m^2
Q_FiLayer := Q_Fi/N_FiLayer = 0.416667 L/s  # This is the flow rate through each filter layer
Q_FiBw := V_FiBw*A_Fi = 3.07001 L/s
# Filtration manifold maximum velocity
HL_FiCleanLayer := h_lKozeny(H_FiLayerLow, D_FiSand60, Q_FiLayer/A_Fi, ε_FiSand, Nu_Water) = 4.52938 cm
PR_FiManifoldMax := HL_FiCleanLayer*Pi_FiManifoldHeadLoss
V_FiManMaxPR := sqrt(2*g*PR_FiManifoldMax) = 0.496508 m/s
V_FiBranchMaxPR := V_FiManMaxPR
# this is the max velocity through a slotted pipe to ensure the pressure recovery is much smaller than the head loss through a sand layer
# Backwash manifold maximum velocity
HL_FiBwSlotForwardMax := 0.1*HL_FiCleanLayer = 0.452938 cm  # We want forward filtration slot headloss to be at most 10% of sand bed headloss.
HL_FiBwSlotsEst := (N_FiLayer*ε_FiSand*Q_FiBw/Q_Fi)^2*HL_FiBwSlotForwardMax = 3.93423 cm
# Headloss through the slots during backwash is equal to the change in flow rate squared divided by the change in area squared, multiplied by the forward filtration slot headloss.
PR_FiBwManifoldMax := HL_FiBwSlotsEst*Pi_FiManifoldHeadLoss = 1.09175 cm
V_FiBwManMaxPR := sqrt(2*g*PR_FiBwManifoldMax) = 0.46274 m/s
V_FiBwBranchMaxPR := V_FiBwManMaxPR
# Clean Bed Head Loss and Maximum Manifold Velocity, Backwash Trunk Diameter
# Backwash manifold design and slot area
# Upper manifolds and branches
# min flow area for non-backwash trunk
A_FiTrunkMin := Q_Fi/((N_FiLayer + 2)/2*V_FiManMaxPR)
A_FiBranchMin := Q_Fi/((N_FiLayer + 2)/2*2*N_FiManBranchLow*V_FiBranchMaxPR)  # max flow rate through any branch (filtration limited)
# 1/3 is the division of flow through one manifold (top and bottom entrances only receive 1/2 flow)
# N.FiManBranch is the number of branches on a single side!
ND_FiManTrunkLow := max(ND_Min(D_circle(A_FiTrunkMin), SDR_26), ND_FiManTrunkMinLow)
ND_FiManBranchLow := max(ND_Min(D_circle(A_FiTrunkMin), Sch40), ND_FiManBranchMinLow)
# Backwash manifold and branches
A_FiBwTrunkMin := Q_FiBw/V_FiBwManMaxPR
A_FiBwBranchMin := Q_FiBw/(2*N_FiManBranchLow*V_FiBwBranchMaxPR)
ND_FiBwTrunkLow := max(ND_Min(D_circle(A_FiBwTrunkMin), SDR_26), ND_FiManTrunkMinLow)
ND_FiBwBranchLow := max(ND_Min(D_circle(A_FiBwBranchMin), Sch40), ND_FiManBranchMinLow)
Q_FiBwManBranch := Q_FiBw/(2*N_FiManBranchLow)
PR_FiBwManBranch := (Q_FiBwManBranch/(π*IR(ND_FiBwBranchLow, Sch40)^2))^2/(2*g)
PR_FiBwTrunk := (Q_FiBw/(π*IR(ND_FiBwTrunkLow, SDR_26)^2))^2/(2*g)
HL_FiBwSlot := (PR_FiBwManBranch + PR_FiBwTrunk)/Pi_FiManifoldHeadLoss
A_FiBwManSlots := A_orifice(HL_FiBwSlot, Pi_VCOrifice, Q_Fi)
A_FiManSlots := 2*A_FiBwManSlots
A_FiTopManSlots := A_FiBwManSlots
HL_FiBwSlotForward := (Q_FiLayer/(Pi_VCOrifice*A_FiBwManSlots*ε_FiSand))^2/(2*g)
HL_FiSlot := (2*Q_FiLayer/(Pi_VCOrifice*A_FiManSlots*ε_FiSand))^2/(2*g)
# Forward filtration head loss constraint check
PR_FiManBranch := (Q_Fi/((N_FiLayer + 2)/2*2*N_FiManBranchLow)/(π*IR(ND_FiManBranchLow, Sch40)^2))^2/(2*g)
Pi_FiHLActual := PR_FiManBranch/HL_FiCleanLayer
# Entrance and exit box dimensions
ND_FiBypass := ND_PipeFlow(Q_Train, SDR_26, 20 cm, 0.5 m, Nu_Water, E_Pvc, K_PipeEnt + K_El90 + K_PipeExit)
ND_DistPipe := ND_PipeFlow(Q_Train, SDR_26, 1.5 m, 100 m, Nu_Water, E_Pvc, K_PipeEnt + 3*K_El90 + K_PipeExit)
ND_FiInletChannelDrain := ND_PipeFlow(Q_Train, SDR_26, 1.5 m, 0.5 m, Nu_Water, E_Pvc, K_PipeEnt + K_El90 + K_PipeExit)
ND_FiEntBoxDrain := ND_PipeFlow(Q_Fi, SDR_26, 1.5 m, 0.5 m, Nu_Water, E_Pvc, K_PipeEnt + K_El90 + K_PipeExit)
ND_FiExitBoxDrain := ND_PipeFlow(Q_Fi, SDR_26, 1.5 m, 0.5 m, Nu_Water, E_Pvc, K_PipeEnt + K_El90 + K_PipeExit)
ND_FiBypassDrain := ND_PipeFlow(Q_Train, SDR_26, 1.5 m, 0.5 m, Nu_Water, E_Pvc, K_PipeEnt + K_El90 + K_PipeExit)
L_FiEntBox := OD_Fitting(ND_FiEntBoxDrain) + 6*OD_Fitting(ND_FiManTrunkLow) + OD_Fitting(ND_FiBwTrunkLow) + 9*S_Fitting
L_FiExitBox := L_FiEntBox
W_FiEntBox := T_PlantWall + 4*S_Fitting + OD_Fitting(max(ND_FiEntBoxDrain, ND_FiBwTrunkLow)) + 2*S_Fitting
W_FiExitBox := OD_Fitting(max(ND_FiExitBoxDrain, ND_FiManTrunkLow, ND_DistPipe)) + 2*S_Fitting
L_FiDistBox := OD_Fitting(max(ND_DistPipe, ND_FiBypassDrain)) + 2*S_Fitting
L_FiInletChannel := N_Fi*L_FiEntBox + (N_Fi - 1)*(L_FiDistBox + 2*T_PlantWall)
S_BoxWallToFiPipe := 30 cm
L_FiEntranceWeir := L_FiEntBox
# Manifold Pipe Lengths
L_FiManTrunk := sqrt(ID(ND_FiPipe, SDR_26)^2 - OD_Fitting(ND_FiManTrunkLow)^2) - CapThickness(ND_FiManTrunkLow)
# Assuming trunk will have a male adpater whose threading feeds through the filter wall.
L_FiBwManTrunk := sqrt(ID(ND_FiPipe, SDR_26)^2 - OD_Fitting(ND_FiBwTrunkLow)^2) - CapThickness(ND_FiBwTrunkLow)
L_FiManCapOffset := IR(ND_FiPipe, SDR_26) - OR_Fitting(ND_FiManBranchLow)/tan(asin(OD_Fitting(ND_FiManBranchLow)/ID(ND_FiPipe, SDR_26)))
L_FiBwManCapOffset := IR(ND_FiPipe, SDR_26) - OR_Fitting(ND_FiBwManBranch)/tan(asin(OD_Fitting(ND_FiBwBranchLow)/ID(ND_FiPipe, SDR_26)))
S_FiBranchFromWall := max(SocketDepth(ND_FiManTrunkLow), ID(ND_FiPipe, SDR_26) - L_FiManTrunk + SocketDepth(ND_FiManTrunkLow)) + OR(ND_FiManBranchLow)
S_FiBwBranchFromWall := max(SocketDepth(ND_FiBwTrunkLow), ID(ND_FiPipe, SDR_26) - L_FiManTrunk + SocketDepth(ND_FiBwTrunkLow)) + OR(ND_FiBwManBranch)
B_FiManBranch := 2*(IR(ND_FiPipe, SDR_26) - S_FiBranchFromWall)/(N_FiManBranchLow - 1)
B_FiBwManBranch := 2*(IR(ND_FiPipe, SDR_26) - S_FiBwBranchFromWall)/(N_FiManBranchLow - 1)
L_FiManBranchLow :=
    for i ∈ 0 .. N_FiManBranchLow - 1
        L[i] ←
            IR(ND_FiPipe, SDR_26)*sin(acos((IR(ND_FiPipe, SDR_26) - S_FiBranchFromWall - B_FiManBranch*i + OR_Fitting(ND_FiManBranchLow))/IR(ND_FiPipe, SDR_26))) - OR(ND_FiManTrunkLow) - CapThickness(ND_FiManBranchLow) if i < N_FiManBranchLow/2
            IR(ND_FiPipe, SDR_26) - IR(ND_FiManTrunkLow, Sch40) - L_FiManCapOffset - CapThickness(ND_FiManBranchLow) if i + 0.5 == N_FiManBranchLow/2
            L[N_FiManBranchLow - 1 - i] otherwise
    L
L_FiBwManBranchLow :=
    for i ∈ 0 .. N_FiManBranchLow - 1
        L[i] ←
            IR(ND_FiPipe, SDR_26)*sin(acos((IR(ND_FiPipe, SDR_26) - S_FiBwBranchFromWall - B_FiBwManBranch*i + OR_Fitting(ND_FiBwManBranch))/IR(ND_FiPipe, SDR_26))) - OR(ND_FiBwTrunkLow) - CapThickness(ND_FiBwManBranch) if i < N_FiManBranchLow/2
            IR(ND_FiPipe, SDR_26) - IR(ND_FiBwTrunkLow, SDR_26) - L_FiBwManCapOffset - CapThickness(ND_FiBwManBranch) if i + 0.5 == N_FiManBranchLow/2
            L[N_FiManBranchLow - 1 - i] otherwise
    L
L_FiManCouplingToFernco := SocketDepth(ND_FiManTrunkLow) + S_Fitting + FerncoCouplingLength(ND_FiManTrunkLow)/2
L_FiBwManCouplingToFernco := SocketDepth(ND_FiBwTrunkLow) + S_Fitting + FerncoCouplingLength(ND_FiBwTrunkLow)/2
L_FiCheckValve := .1651 m
# Total Sand Depth, Filter Pipe Length, Head Loss
H_FiSandLow := N_FiLayer*H_FiLayerLow + OR(ND_FiManBranchLow)
H_FiSandActive := H_FiSandLow - OR(ND_FiManBranchLow)
H_FiFluidizedBed := Pi_FiFluidized*H_FiSandLow
L_FiBodyPipe := H_FiFluidizedBed + H_FiFluidizedBedToSiphon + (OR_Fitting(ND_FiManTrunkLow) + S_Fitting/2) + (OD_Fitting(ND_FiBwTrunkLow) + S_Fitting/2) + 2*(H_Gasket - H_FiCap)
# Sand bed head loss during steady state backwash.
HL_FiBwSS := H_FiSandLow*(Rho_FiSand - Rho_H2O)*(1 - ε_FiSand)/Rho_H2O
# The backwash head loss is almost exactly equal  to the sand bed depth. Note that this ignores losses in the plumbing.
HL_FiDirty := 30 cm  # Mickey suggested this value based on lab experience. Don't know if this is the same for the low flow filter
HL_FiTerminal := HL_FiCleanLayer + HL_FiDirty
HL_FiBwInitiation := HL_FiBwSF + HL_FiBwSS
# How much does the filter bed over fluidize when the entrance box level lowers after backwash initiation?
H_FiFluidizedBedVariation := (HL_FiBwInitiation - HL_FiBwSS)*(W_FiEntBox*L_FiEntBox - 4*π*(OR(ND_FiManTrunkLow)^2 + OR(ND_FiEntBoxDrain)^2))/A_FiActive
# Plumbing Head Loss
HL_FiBwInletManifold := 1/3*h_f(Q_FiBw, ID(ND_FiBwTrunkLow, SDR_26), L_FiManTrunk, Nu_Water, E_Pvc) + h_e(Q_FiBw/(2*N_FiManBranchLow), ID(ND_FiBwBranchLow, Sch40), K_PipeEnt) + 2/3*h_f(Q_FiBw/(2*N_FiManBranchLow), ID(ND_FiBwBranchLow, Sch40), L_FiManBranchLow[0], Nu_Water, E_Pvc) + 1/3*h_f(Q_FiBw/(2*N_FiManBranchLow), ID(ND_FiBwBranchLow, Sch40), L_FiManBranchLow[1], Nu_Water, E_Pvc) + HL_FiBwSlot
HL_FiFwdInletManifold(Q_Layer) := 1/3*h_f(2*Q_Layer, ID(ND_FiManTrunkLow, SDR_26), L_FiManTrunk, Nu_Water, E_Pvc) + h_e(Q_Layer/N_FiManBranchLow, ID(ND_FiManBranchLow, Sch40), K_PipeEnt) + 2/3*h_f(Q_Layer/N_FiManBranchLow, ID(ND_FiManBranchLow, Sch40), L_FiManBranchLow[0], Nu_Water, E_Pvc) + 1/3*h_f(Q_Layer/N_FiManBranchLow, ID(ND_FiManBranchLow, Sch40), L_FiManBranchLow[1], Nu_Water, E_Pvc) + HL_FiSlot
HL_FiFwdBotTopInletManifold(Q_Layer) := 1/3*h_f(Q_Layer, ID(ND_FiManTrunkLow, SDR_26), L_FiManTrunk, Nu_Water, E_Pvc) + h_e(Q_Layer/(2*N_FiManBranchLow), ID(ND_FiManBranchLow, Sch40), K_PipeEnt) + 2/3*h_f(Q_Layer/(2*N_FiManBranchLow), ID(ND_FiManBranchLow, Sch40), L_FiManBranchLow[0], Nu_Water, E_Pvc) + 1/3*h_f(Q_Layer/(2*N_FiManBranchLow), ID(ND_FiManBranchLow, Sch40), L_FiManBranchLow[1], Nu_Water, E_Pvc) + HL_FiSlot
HL_FiFwdOutletManifold(Q_Layer) := 1/3*h_f(2*Q_Layer, ID(ND_FiBwTrunkLow, SDR_26), L_FiManTrunk, Nu_Water, E_Pvc) + h_e(Q_Layer/N_FiManBranchLow, ID(ND_FiManBranchLow, Sch40), K_PipeExit) + 2/3*h_f(Q_Layer/N_FiManBranchLow, ID(ND_FiManBranchLow, Sch40), L_FiManBranchLow[0], Nu_Water, E_Pvc) + 1/3*h_f(Q_Layer/N_FiManBranchLow, ID(ND_FiManBranchLow, Sch40), L_FiManBranchLow[1], Nu_Water, E_Pvc)
L_LongestPath := L_FiBodyPipe + S_BoxWallToFiPipe
HL_FiInletPlumbing1(Q_Layer) := h_l(Q_Layer, ID(ND_FiManTrunkLow, SDR_26), L_LongestPath, K_PipeEnt + K_TeeFlowBr + K_El45, Nu_Water, E_Pvc) + HL_FiFwdBotTopInletManifold(Q_Layer)
HL_FiInletPlumbing2(Q_Layer) := h_l(2*Q_Layer, ID(ND_FiManTrunkLow, SDR_26), L_LongestPath, K_PipeEnt + K_TeeFlowBr + 2*K_El45, Nu_Water, E_Pvc) + HL_FiFwdInletManifold(Q_Layer)
# These are numbered from the top of the filter bed down. The top and bottom inlets have half the flow rate (only serve the layers below and above, respectively). The bottom inlet has the diameter of the backwash trunk.
HL_FiInletPlumbing3(Q_Layer) := h_l(2*Q_Layer, ID(ND_FiManTrunkLow, SDR_26), L_LongestPath, K_PipeEnt + K_TeeFlowBr + 2*K_El45, Nu_Water, E_Pvc) + HL_FiFwdInletManifold(Q_Layer)
HL_FiInletPlumbing4(Q_Layer) := h_l(Q_Layer, ID(ND_FiManTrunkLow, SDR_26), L_LongestPath, K_PipeEnt + K_TeeFlowBr + K_El45, Nu_Water, E_Pvc) + HL_FiFwdBotTopInletManifold(Q_Layer)
HL_FiInletPlumbingMax(Q_1, Q_2, Q_3, Q_4) := max(HL_FiInletPlumbing1(Q_1), HL_FiInletPlumbing2(Q_2), HL_FiInletPlumbing3(Q_3), HL_FiInletPlumbing4(Q_4))
HL_FiInletPlumbingMin(Q_1, Q_2, Q_3, Q_4) := min(HL_FiInletPlumbing1(Q_1), HL_FiInletPlumbing2(Q_2), HL_FiInletPlumbing3(Q_3), HL_FiInletPlumbing4(Q_4))
HL_FiInletPlumbingAve(Q_1, Q_2, Q_3, Q_4) := (HL_FiInletPlumbing1(Q_1) + HL_FiInletPlumbing2(Q_2) + HL_FiInletPlumbing3(Q_3) + HL_FiInletPlumbing4(Q_4))/4
HL_FiBwInletPlumbing := h_l(Q_Fi, ID(ND_FiManTrunkLow, SDR_26), L_LongestPath, K_PipeEnt + K_TeeFlowBr + K_El45, Nu_Water, E_Pvc) + HL_FiBwInletManifold
HL_FiOutletPlumbing1(Q_Layer) := h_l(2*Q_Layer, ID(ND_FiManTrunkLow, SDR_26), L_LongestPath, K_El45 + K_TeeFlowBr + K_PipeExit, Nu_Water, E_Pvc) + HL_FiFwdOutletManifold(Q_Layer)
HL_FiOutletPlumbing2(Q_Layer) := h_l(2*Q_Layer, ID(ND_FiManTrunkLow, SDR_26), L_LongestPath, K_TeeFlowBr + K_PipeExit, Nu_Water, E_Pvc) + HL_FiFwdOutletManifold(Q_Layer)
HL_FiOutletPlumbing3(Q_Layer) := h_l(2*Q_Layer, ID(ND_FiManTrunkLow, SDR_26), L_LongestPath, K_El45 + K_TeeFlowBr + K_PipeExit, Nu_Water, E_Pvc) + HL_FiFwdOutletManifold(Q_Layer)
HL_FiOutletPlumbingMax(Q_1, Q_3) := max(HL_FiOutletPlumbing1(Q_1), HL_FiOutletPlumbing2(Q_1), HL_FiOutletPlumbing3(Q_3))
HL_FiOutletPlumbingMin(Q_1, Q_3) := min(HL_FiOutletPlumbing1(Q_1), HL_FiOutletPlumbing2(Q_1), HL_FiOutletPlumbing3(Q_3))
HL_FiOutletPlumbingAve(Q_1, Q_3) := (HL_FiOutletPlumbing1(Q_1) + HL_FiOutletPlumbing2(Q_1) + HL_FiOutletPlumbing3(Q_3))/3
# Path Head Loss Calculations and Flow Distribution Between Layers
HL_FiCleanLyr(Q) := h_lKozeny(H_FiLayerLow, D_FiSand60, Q/A_FiActive, ε_FiSand, Nu_Water)
HL_FiPathClean1(Q_Path) := HL_FiInletPlumbing1(Q_Path) + HL_FiCleanLyr(Q_Path) + HL_FiOutletPlumbing1(Q_Path)
HL_FiPathClean2(Q_Path) := HL_FiInletPlumbing2(Q_Path) + HL_FiCleanLyr(Q_Path) + HL_FiOutletPlumbing1(Q_Path)
HL_FiPathClean3(Q_Path) := HL_FiInletPlumbing2(Q_Path) + HL_FiCleanLyr(Q_Path) + HL_FiOutletPlumbing2(Q_Path)
HL_FiPathClean4(Q_Path) := HL_FiInletPlumbing3(Q_Path) + HL_FiCleanLyr(Q_Path) + HL_FiOutletPlumbing2(Q_Path)
HL_FiPathClean5(Q_Path) := HL_FiInletPlumbing3(Q_Path) + HL_FiCleanLyr(Q_Path) + HL_FiOutletPlumbing3(Q_Path)
HL_FiPathClean6(Q_Path) := HL_FiInletPlumbing4(Q_Path) + HL_FiCleanLyr(Q_Path) + HL_FiOutletPlumbing3(Q_Path)
HL_FiPathCleanMax(Q_1, Q_2, Q_3, Q_4, Q_5, Q_6) := max(HL_FiPathClean1(Q_1), HL_FiPathClean2(Q_2), HL_FiPathClean3(Q_3), HL_FiPathClean4(Q_4), HL_FiPathClean5(Q_5), HL_FiPathClean6(Q_6))
HL_FiPathCleanMin(Q_1, Q_2, Q_3, Q_4, Q_5, Q_6) := min(HL_FiPathClean1(Q_1), HL_FiPathClean2(Q_2), HL_FiPathClean3(Q_3), HL_FiPathClean4(Q_4), HL_FiPathClean5(Q_5), HL_FiPathClean6(Q_6))
# In reality the flow will distribute itself such that all paths have the same head loss. We will treat the average of all of the calculated path head losses as the actual complete head loss accross all paths.
HL_FiPathCleanAve(Q_1, Q_2, Q_3, Q_4, Q_5, Q_6) := (HL_FiPathClean1(Q_1) + HL_FiPathClean2(Q_2) + HL_FiPathClean3(Q_3) + HL_FiPathClean4(Q_4) + HL_FiPathClean5(Q_5) + HL_FiPathClean6(Q_6))/6
Pi_QFiLayer(Q_1, Q_2, Q_3, Q_4, Q_5, Q_6) := sqrt(HL_FiPathCleanMin(Q_1, Q_2, Q_3, Q_4, Q_5, Q_6)/HL_FiPathCleanMax(Q_1, Q_2, Q_3, Q_4, Q_5, Q_6))
# This estimate is reasonable as long as the answer is close to 1
# Guess:
Q_1 := Q_FiLayer
Q_2 := Q_FiLayer
Q_3 := Q_FiLayer
Q_4 := Q_FiLayer
Q_5 := Q_FiLayer
Q_6 := Q_FiLayer
Given
HL_FiPathClean1(Q_1) == HL_FiPathClean2(Q_2)
HL_FiPathClean2(Q_2) == HL_FiPathClean3(Q_3)
Q_1 + Q_2 + Q_3 + Q_4 + Q_5 + Q_6 == Q_Fi
HL_FiPathClean3(Q_3) == HL_FiPathClean4(Q_4)
HL_FiPathClean4(Q_4) == HL_FiPathClean5(Q_5)
HL_FiPathClean5(Q_5) == HL_FiPathClean6(Q_6)
HL_FiPath(Q) := Find(Q_1, Q_2, Q_3, Q_4, Q_5, Q_6)
Q_FiPath := HL_FiPath(Q_Fi) = [0.461002; 0.391012; 0.397986; 0.397986; 0.391012; 0.461002] L/s
HL_FiPathClean1(Q_FiPath[0]) = 9.90147 cm
Q_FiLayer1 := Q_FiPath[0]
HL_FiPathClean2(Q_FiPath[1]) = 9.90147 cm
Q_FiLayer2 := Q_FiPath[1]
HL_FiPathClean3(Q_FiPath[2]) = 9.90147 cm
Q_FiLayer3 := Q_FiPath[2]
HL_FiCleanPath := HL_FiPathClean1(Q_FiPath[0])
HL_FiPathClean4(Q_FiPath[3]) = 9.90147 cm
Q_FiLayer4 := Q_FiPath[3]
HL_FiPathClean5(Q_FiPath[4]) = 9.90147 cm
Q_FiLayer5 := Q_FiPath[4]
HL_FiPathClean6(Q_FiPath[5]) = 9.90147 cm
Q_FiLayer6 := Q_FiPath[5]
# Slotted Pipe Design
L_FiManBranchAvail := 2*(sum(L_FiManBranchLow) - N_FiManBranchLow*(SocketDepth(ND_FiManBranchLow) + 2*L_FiManBranchExt)) = 49.1435 in
# This is the total length of branch manifold available on a trunk (i.e., the length available for slots on 2*N.FiManBranch)
L_FiBwManSlotTotal := A_FiBwManSlots/W_FiManSlots = 24.2263 m
L_FiManSlotTotal := A_FiManSlots/W_FiManSlots = 48.4526 m
L_FiTopManSlotTotal := A_FiTopManSlots/W_FiManSlots = 24.2263 m
# We select  B_FiManSlot := 1/16*in = 1.5875 mm  for the closest slot spacing, and N_FiSlotRows := 2  for best structural integrity of these pipes
# We select  B_FiBwTopManSlot := 1/8*in = 3.175 mm  for the closest slot spacing, and N_FiBwSlotRows := 2  for best structural integrity of these pipes
N_FiManSlotsPerBranch := floor((L_FiManBranchLow - 2*L_FiManBranchExt - SocketDepth(ND_FiManBranchLow))/B_FiManSlot)
N_FiBwTopManSlotsPerBranch := floor((L_FiManBranchLow - 2*L_FiManBranchExt - SocketDepth(ND_FiManBranchLow))/B_FiBwTopManSlot)
N_FiSlotsPerMan := 2*N_FiSlotRows*sum(N_FiManSlotsPerBranch)
N_FiBwTopSlotsPerMan := 2*N_FiBwSlotRows*sum(N_FiBwTopManSlotsPerBranch)
L_FiManSlotCurvedInner := L_FiManSlotTotal/N_FiSlotsPerMan  # Check against available circumference:
C_FiManBranchInner := π*ID(ND_FiManBranchLow, Sch40)
L_FiBwTopManSlotCurvedInner := L_FiBwManSlotTotal/N_FiBwTopSlotsPerMan
L_FiManSlotInner := ID(ND_FiManBranchLow, Sch40)*sin(2*π*L_FiManSlotCurvedInner/C_FiManBranchInner/2)
L_FiBwTopManSlotInner := ID(ND_FiManBranchLow, Sch40)*sin(2*π*L_FiBwTopManSlotCurvedInner/C_FiManBranchInner/2)
H_FiManCenterToSlot := sqrt(IR(ND_FiManBranchLow, Sch40)^2 - (L_FiManSlotInner/2)^2)
H_FiBwTopManCenterToSlot := sqrt(IR(ND_FiManBranchLow, Sch40)^2 - (L_FiBwTopManSlotInner/2)^2)
L_FiManSlotOuter := 2*sqrt(OR(ND_FiManBranchLow)^2 - H_FiManCenterToSlot^2)
L_FiBwTopManSlotOuter := 2*sqrt(OR(ND_FiManBranchLow)^2 - H_FiBwTopManCenterToSlot^2)
H_FiSlot := OR(ND_FiManBranchLow) - H_FiManCenterToSlot
H_FiBwSlot := OR(ND_FiManBranchLow) - H_FiBwTopManCenterToSlot
N_FiManBranchTotal := N_Fi*(N_FiLayer - 1)*N_FiManBranchLow
N_FiBwTopManBranchTotal := 2*N_Fi*N_FiManBranchLow
# SPECIFICATIONS:  we need  N_FiManBranchTotal = 50 pipes of diameter  ND_FiManBranchLow = 1.5 in  with slots of width  W_FiManSlots = 0.2032 mm,straight length L_FiManSlotOuter = 3.79885 cm, and a spacing of B_FiManSlot = 0.0625 in
# SPECIFICATIONS:  we need  N_FiBwTopManBranchTotal = 20 pipes of diameter  ND_FiManBranchLow = 1.5 in, with slots of width W_FiManSlots = 0.2032 mm, straight length L_FiBwTopManSlotOuter = 3.80735 cm  and a spacing of  B_FiBwTopManSlot = 0.125 in
P_FiManBranches := N_FiManBranchTotal*L_FiManBranchLow*(9*USD/(5 ft)) = [38.327; 67.6968; 78.5396; 67.6968; 38.327] USD
P_FiBwManBranches := N_FiBwTopManBranchTotal*L_FiManBranchLow*(12*USD/(5 ft)) = [20.441; 36.105; 41.8878; 36.105; 20.441] USD
Radius_Trunk := IR(ND_FiManTrunkLow, 2)
Chord_TrunkPerpendicular := OR(ND_FiManBranchLow)
Chord_TrunkHorizontal := (Radius_Trunk*cos(asin(Chord_TrunkPerpendicular/2/Radius_Trunk)))
L_SlotCut := floor(Chord_TrunkHorizontal*2/B_FiManSlot)*B_FiManSlot + W_FiManSlots
# Siphon Design
L_FiSiphonEst := L_FiBodyPipe + 5*S_Fitting
K_FiSiphon := K_PipeEnt + K_TeeFlowBr + 2*K_El90 + K_PipeExit  # Minor loss coefficients for flow through the siphon. The tee is treated as an extra elbow
HL_FiSiphonInitiationMax := HL_FiBwSF + H_FiForwardNoSuckAir + HL_FiDirty + HL_FiBwInletPlumbing + HL_FiBwSS + HL_FiSiphonMax - H_FiSiphonNoSuckAir
HL_FiSiphonPipe := h_l(Q_FiBw, ID(ND_FiBwTrunkLow, SDR_26), L_FiSiphonEst, K_FiSiphon, Nu_Water, E_Pvc)
HL_FiSiphonOutlet := Headloss_weir(Q_FiBw, ID(ND_FiBwTrunkLow, SDR_26))
HL_FiSiphonOrifice := h_orifice(ID(ND_FiBwTrunkLow, SDR_26), Pi_VCOrifice, Q_FiBw)
HL_FiBwTotalSS := HL_FiBwInletPlumbing + HL_FiBwSS + HL_FiSiphonOrifice + HL_FiSiphonPipe + HL_FiSiphonOutlet
Rho_FiFluidized := Rho_H2O*ε_FiSand*Pi_FiFluidized + Rho_FiSand*(1 - ε_FiSand)/Pi_FiFluidized
# Elevations
# changed to be more like the elevation calculations in the standard code
# The logic sequence for the design of filter elevations begins with the water level in the inlet channel, from which you get all entrance box elevations. Exit box elevations are calculated based on path head loss.
Z_FiEntWeir := Z_SedLaunder + OR(ND_SedLaunder)
HL_FiEntWeir := Headloss_weir(Q_Fi, L_FiEntranceWeir)
ZW_FiInletChannel := Z_FiEntWeir + HL_FiEntWeir
Z_FiEntranceWeir := ZW_FiInletChannel - HL_FiEntWeir
ZW_FiEntMax := Z_FiEntWeir - H_FiWeirFreefall
HL_FiOverflowWeir := Headloss_weir(Q_Fi, W_FiEntBox - S_Fitting)
ZW_FiEntTerminal := ZW_FiEntMax - HL_FiOverflowWeir
Z_FiOverflowWeir := ZW_FiEntTerminal
ZW_FiEntCleanForward := ZW_FiEntTerminal - HL_FiDirty
H_FiExitWeir := 5 cm
HL_FiExitWeir := Headloss_weir(Q_Fi/N_Fi, W_FiExitBox)  # missing stubs here?
Z_FiEntTank := ZW_FiEntCleanForward - HL_FiCleanPath - HL_FiExitWeir - H_FiExitWeir
ZW_FiEntBwSS := Z_FiEntTank + H_FiBwNoSuckAir
Z_FiTop := Z_FiEntTank - ChkValveLength(ND_FiAirRelValve) - H_FiCap
# from standard code
H_FiInletChannelMax := 50 cm
HW_FiInletChannelMax := H_FiInletChannelMax - H_PlantFreeboard
Z_FiInletChannelBottom := ZW_FiInletChannel - HW_FiInletChannelMax
Z_FiEntranceBottom := ZW_FiEntBwSS - H_FiBwNoSuckAir
Z_FiEntChannel := Z_FiEntTank
Z_FiExitTank := Z_FiEntTank
Z_FiInletDrain := ZW_FiEntMax
H_FiInletFreeboard := 5 cm
H_FiEntTank := ZW_FiInletChannel + H_FiInletFreeboard - Z_FiEntTank
Z_FiSiphonOutlet := ZW_FiEntBwSS - HL_FiBwTotalSS
Z_FiBwPipe := Z_FiTop - S_Fitting/2 - OD_Fitting(ND_FiBwTrunkLow) - (H_Gasket - H_FiCap)
S_FiInlet4 := OR_Fitting(ND_FiManTrunkLow) + S_Fitting/2 + (H_Gasket - H_FiCap)
Z_FiBottom := Z_FiBwPipe - H_FiFluidizedBedToSiphon - H_FiFluidizedBed - S_FiInlet4
Z_FiInlet4 := Z_FiBottom + S_FiInlet4
Z_FiInlet3 := Z_FiInlet4 + 2*H_FiLayerLow
Z_FiOutlet3 := Z_FiInlet4 + H_FiLayerLow
Z_FiInlet2 := Z_FiInlet3 + 2*H_FiLayerLow
Z_FiOutlet2 := Z_FiOutlet3 + 2*H_FiLayerLow
Z_FiInlet1 := Z_FiInlet2 + 2*H_FiLayerLow
Z_FiOutlet1 := Z_FiOutlet2 + 2*H_FiLayerLow
# Inlet channel and flow control weirs
# Inlet channel
Pi_QFi := 0.97
# Pi_QFi should be in expert inputs. This is the ratio of flow through two filters based on head loss in the inlet channel and flow over the weirs into each filter.
HW_FiInletChannel := ZW_FiInletChannel - Z_FiEntChannel
HL_FiInletChannel := Headloss_weir(Q_Fi, L_FiEntBox) - Headloss_weir(Q_Fi*Pi_QFi, L_FiEntBox)
W_FiInletChannelFlowDist := W_HorizChannel(Q_Plant, HW_FiInletChannel, HL_FiInletChannel, L_FiInletChannel, Nu_Water, E_Concrete, 0)
W_FiInletChannelLaunderElbow := 2*SocketDepth(ND_SedLaunder) + ElbowRadius(ND_SedLaunder) + OR_Fitting(ND_SedLaunder)
W_FiInletChannelDrain := OD_Fitting(ND_FiInletChannelDrain) + 2*S_Fitting
W_FiInletChannel := max(W_FiInletChannelFlowDist, W_ChannelMin, W_FiInletChannelLaunderElbow, W_FiInletChannelDrain)
# Backwash flow rate
# For the integer number of low-flow plant filters with fixed pipe diameters, the filtration flow rate Q_Fi  is not necessarily sufficient to backwash the filters. Below the slotted flow control weir is designed such that the required backwash flow rate is always given to the filter being backwashed when the stop gate is removed, and the remaining water is divided between the remaining filters
Q_FiBw := V_FiBw*π*IR(ND_FiPipe, SDR_26)^2
Pi_QFiBw := 1.1
# Ratio of max backwash flow rate (when plant flow is Q.Plant) to desired backwash flow rate Q.FiBw. This is saying the flow rate into the filter being backwashed will never exceed 110% of the desired backwash flow rate (assuming plant flow rate doesn't exceed the design flow rate).
# Slotted flow control weir design
Pi_QFiBw == Q_FiBwMax/Q_FiBw
# This is only for the case when one or more filters is drawn! If there is only one filter, the flow control is not necessasy.
HL_FiEntranceWeirOthers :=
    Headloss_weir(Q_Plant - Pi_QFiBw*Q_FiBw, L_FiEntranceWeir*(N_Fi - 1)) if N_Fi > 1
    2 cm otherwise  # Inlet channel water level is this high above the filtration flow control weir
# 2 cm is arbitraty and should be deleted entirely. This if statement should not be needed.
# HL_FiBFlowControl is measured from the top of the filtration flow control weir. If the filter being backwashed receives exactly Q_FiBw then the water level behind the slot will just reach the filtration flow control weir and no water will be distributed to other filters. Any additional flow will cause the water level to rise above the filtration flow control weir and be distributed.
Pi_QFiBw == 2/3*Pi_VenaContractaOrifice*sqrt(2*g)*W_Slot*H_SlotMax^(3/2)/(2/3*Pi_VenaContractaOrifice*sqrt(2*g)*W_Slot*H_Slot^(3/2))
HL_FiBwFlowControl := HL_FiEntranceWeirOthers/(Pi_QFiBw^(2/3) - 1)
W_FiBwFlowControl := W_rectweir(Q_FiBw, HL_FiBwFlowControl)  # This is the backwash flow control slot width.
Pi_QFiBw == (H_SlotMax/H_Slot)^(3/2)
Z_FiBwFlowControl := Z_FiEntWeir - HL_FiBwFlowControl  # This is the elevation of the bottom of the backwash flow control slot
# The max water level on the slot is the normal slot head loss when receiving Q_FiBw plus the head loss over the
# other filters' inlet weirs when receiving the remaining water.
HL_FiSlotFiltration := Headloss_weir(Q_Fi, W_FiBwFlowControl)
ZW_FiPreSlotFiltration := Z_FiBwFlowControl + HL_FiSlotFiltration
H_SlotMax == H_Slot + (3*(Q_Plant - Q_FiBw*Pi_QFiBw)/(2*Pi_VenaContractaOrifice*sqrt(2*g)*L_FiEntranceWeir*(N_Fi - 1)))^(2/3)
# Because the slot is designed to handleQ_FiBw which is greater than Q_Fi ,  during forward filtration that water level preceding the slot should be well below the inlet weir level. Therefore the fact that the bottom part of the slot will become submerged as head loss builds up through the filter bed should not be critical because there is space for extra head loss. The following calculations check that assumption by calculating the flow rate through the slot in the most critically submerged case with the water level backing up to the inlet channel level and comparing with Q_Fi.
# Substituting in to the previous equation for Pi_QFiBw
H_FiBwSlotFreefallMin := ZW_FiInletChannel - ZW_FiEntMax
H_FiBwSlotFreefallMin = 0.0418244 m
Pi_QFiBw == ((H_Slot + (3*(Q_Plant - Q_FiBw*Pi_QFiBw)/(2*Pi_VenaContractaOrifice*sqrt(2*g)*L_FiEntranceWeir*(N_Fi - 1)))^(2/3))/H_Slot)^(3/2)
# Now calculate the flow through the backwash flow control weir that is partly a weir with free fall and partly submerged and acting like an orifice.
Q_FiSlotSubmerged := Q_RectWeir(H_FiBwSlotFreefallMin, W_FiBwFlowControl) + (ZW_FiEntMax - Z_FiBwFlowControl)*W_FiBwFlowControl*Pi_VCOrifice*sqrt(2*g*H_FiBwSlotFreefallMin)
H_Slot == (3*(Q_Plant - Q_FiBw*Pi_QFiBw)/(2*Pi_VenaContractaOrifice*sqrt(2*g)*L_FiEntranceWeir*(N_Fi - 1)))^(2/3)/(Pi_QFiBw^(2/3) - 1)
Pi_QFiBwSubmergedSlot := Q_FiSlotSubmerged/Q_Fi
H_Slot == Headloss_weir(Q_Plant - Pi_QFiBw*Q_FiBw, L_FiEntranceWeir*(N_Fi - 1))/(Pi_QFiBw^(2/3) - 1)
# Stop gate design
HL_FiOpenWeirMax := 0.05 cm
H_FiStopGate := 10 cm
W_FiStopGate := Q_FiBw/(Pi_VCOrifice*H_FiStopGate*sqrt(2*g*HL_FiOpenWeirMax))
# Model opening like orifice flow and calculate W based on area to give the max head loss
# Extra stoppers for backwash slot
# In order to be able to calibrate the size of the backwash flow control slot when beginning plant operation so that Q_FiBw really enters the entrance box when the stop gate is removed, the slot will be constructed deeper than calculated previously, and removable stoppers can be placed or removed to adjust the elevation of the bottom of the slot. Each stopper will represent on the order of 10% of the desired backwash flow rate. The drawing will show the slot drawn deeper by a height of N_FiSlotStopper stoppers with the stoppers placed such that the height of the slot is the height calculated above.
Q_FiSlotStopperIncrementEst := 0.1*Q_FiBw
H_FiSlotStopper := Ceil((3*(Q_FiBw + Q_FiSlotStopperIncrementEst)/(2*Pi_VCOrifice*sqrt(2*g)*W_FiBwFlowControl))^(2/3) - HL_FiBwFlowControl, 1 cm)
N_FiSlotStopper := 3
# Air removal baffle
# Use the same head loss criteria used for the height of the removable stop gate weir, modeling the space as a sluice gate
H_FiAirRemovalGap := Ceil(Q_FiBw/(Pi_VCOrifice*L_FiEntBox*sqrt(2*g*HL_FiOpenWeirMax)), 1 cm)
S_FiAirRemovalBaffle := T_PlantWall - T_FiWeir - T_Acrylic  # Space between slotted flow control weir and air removal baffle
# Main plant drain channel
# To calculate the maximum possible flow through the drain channel, all tanks are assumed to be initially full and emptying in the same time
# Note that the tank heights are used instead of the water levels in the calculation of maximum flow to have a conservative design.
W_PlantDC := 1 m
Q_TankDrainMax := Q_pipeminor(ID(ND_EtDrain, SDR_26), H_Et, K_PipeEnt + K_PipeExit)*2 + Q_pipeminor(ID(ND_FlocDrain, SDR_26), H_Floc, K_PipeEnt + K_PipeExit)*1 + Q_pipeminor(ID(ND_SedJetReverser, SDR_26), HW_Sed, K_PipeEnt + K_PipeExit)
Q_PlantDCMax := Q_TankDrainMax + N_Fi*(1 + N_Fi > 1)*Q_Fi
H_DrainChannelMax := 1 m
L_PlantDC := W_Sed + 4*T_PlantWall + L_Floc + W_Et + W_HumanMin + W_FiInletChannel + 2*T_SedWeir
ND_PlantDC := ND_PipeFlow(Q_PlantDCMax, SDR_26, H_DrainChannelMax, L_PlantDC, Nu_Water, E_Concrete, K_PipeEnt + K_PipeExit)
ND_PlantSideDC := ND_PipeFlow(N_Fi*(1 + N_Fi > 1)*Q_Fi, SDR_26, H_DrainChannelMax, L_PlantDC, Nu_Water, E_Concrete, K_PipeEnt + K_PipeExit)
Z_PlantDCBottom := Z_FiBottom - H_DrainChannelMax
