# Engineer Entered Values:
Q_Plant := 3000*L/min
# sed tank parameters
W_SedBay := 42.5 in  # width of lamella = width of sed tank bay
EN_PipeSpec := 4
EN_DrillSeries := 1
N_SedTanks := 3
# Number of sedimentation tanks (to ensure currently reasonable dimensions, this might be a factor by which to enlarge the number of sedimentation tanks in the future.)
N_SedBaysEst := 1  # Number of bays (slope pairs) in each sedimentation tank
H_SedFrameWall := 7 cm
W_SedFrameWall := 4 cm
# floc parameteres
T_FlocBaffle := 2 mm
S_FlocChannel := 5 cm
# Chem Feed Parameters
C_FcmDoseMax := 90*mg/L
C_FcmAlum := 120*gm/L
EN_FcmTube := 0
Ti_StockMin := 30 hr
# Values used to Draw Plant:
T_PlantWall := 15 cm
W_MpWalkway := 1 m
