# [reference: MasterProgram.xmcd]
# [reference: floctank.xmcd]
# [reference: SedTank- with pieces.xmcd]
L_FlocTank := N_FlocChannels*L_Sed = 55.2943 m
Z_FlocTank := HW_Sed - HW_FlocChannel = 0 m  # Z.FlocTank is the elevation of the flocculator with respect to the bottom of the sed tank.
# Sedimentation Tank Sludge Drain:
N_SedSludgeOrifices = 110  # per cell
Ti_SludgeDrain = 30 min
W_SedSludge = 16.8638 cm  # Width of the sludge channel
B_SedSludgeOrifices = 10 cm
H_SedSludge = 8.43189 cm  # Depth of the sludge channel
T_SedSludge = 5 cm
T_SedSludge = 5 cm
# Thickness of the plate topping the sludge channel
# through which drain holes are formed
W_SedDrainCover = 26.8638 cm
D_SedSludgeOrifice = 0.01 m  # Diameter of drain orifices
W_SedInletBottom = 0.395681 m
N_SedSludgeOrifices = 110
ND_SedSludgeValve = 4 in
# Sedimentation Tank Dimensions:
Z_SedSludge = 0.134319 m  # Height from 0 of the top of the sludge drain
Z_SedSlopes = 0.776357 m  # Height from 0 of the top of the inlet manifold
W_Sed = 4.24 m  # Total tank wall height
L_Sed = 11.0589 m  # Total tank length
ASSUMPTIONS
S_Walkway := 50 cm  # Distance from the border of the wall
FlocTankDrainAdapterScript :=
    Local ← layer_new("FlocDrainAdapter", green)
    for i ∈ 0 .. last(Y_FlocDrainValves)
        Local ← stack(Local, MaleAdapterF([-L_Sed - CouplingLength(ND_FlocValve) - T_PlantWall; Y_FlocDrainValves[i]; floc_origin[2]], [0; 0]*deg, ND_FlocValve, EN_PipeSpec))
    return stack(Local, FreezeLayer("FlocDrainAdapter"))
H_Walkway := 30 cm  # Thickness of the walkway
W_Walkway := 1.5 m
# ORIGIN POINTS
Walkway_Origin := [Plant_Origin[0] - T_PlantWall - L_Sed; Plant_Origin[1]; W_Sed - S_Walkway]
FlocTankDrainValveScript :=
    Local ← layer_new("FlocDrainValve", blue)
    XCoordinate ←
        (-L_Sed - CouplingLength(ND_FlocValve) - T_PlantWall) if MaleAdapterLength(ND_FlocValve) - SocketDepth(ND_FlocValve) < 0.5*ValveLength(ND_FlocValve)
        (-L_Sed - CouplingLength(ND_FlocValve) - T_PlantWall + 0.5*ValveLength(ND_FlocValve) - MaleAdapterLength(ND_FlocValve) + SocketDepth(ND_FlocValve)) otherwise
    for i ∈ 0 .. last(Y_FlocDrainValves)
        Insert ← insertdwg("VAL-Scaled-Gate-Valve-Threaded", [XCoordinate; Y_FlocDrainValves[i]; floc_origin[2]], D_FlocScale, 0 deg)
        Local ← stack(Local, Insert)
    Local ← stack(Local, FreezeLayer("FlocDrainValve"))
    return Local
Drainboxes_Origin := [
    Plant_Origin[0] - T_PlantWall - L_Sed;
    W_SedBay*N_SedBays + ((2*T_PlantWall - T_PlantWall)*N_SedBays);
    W_Sed - S_Walkway
]
# ESTOS COMO Q NO LOS ESTOY USANDO XQ USO LOS DE LOS VALVE SCRIPTS
FlocDrainboxes_Origin := [
    Plant_Origin[0] - T_PlantWall - L_Sed;
    W_SedBay*N_SedBays + ((2*T_PlantWall - T_PlantWall)*N_SedBays);
    W_Sed - S_Walkway
]
# DIMENSION POINTS
Walkway_Dimensions := [
    -W_Walkway;
    ((W_FlocChannel*N_FlocChannels) - (T_PlantWall*N_FlocChannels)) + (W_Sed + (N_SedBays*T_PlantWall));
    H_Walkway
]
Drainboxes_Dimensions := [-2*D_SedDrainValve; 2*D_SedDrainValve; H_Walkway]
FlocDrainboxes_Dimensions := [-2*ND_FlocValve; 2*ND_FlocValve; H_Walkway]
# WALKWAY SCRIPT
Walkway_Script :=
    WalkwayLayer ← layer_new("Walkway", grey)
    WalkwayBox ← BoxF(Walkway_Origin, Walkway_Origin + Walkway_Dimensions, [0; 0; 0]*deg)
    FreezeWalkwayBox ← FreezeLayer("Walkway")
    for i ∈ 0 .. N_SedBays - 1
        DrainBoxes ← stack(DrainBoxes, BoxF([Plant_Origin[0] - T_PlantWall - L_Sed; W_SedBay*(N_SedBays - i) - 0.5*W_SedBay; W_Sed - S_Walkway], [Plant_Origin[0] - T_PlantWall - L_Sed; W_SedBay*(N_SedBays - i) - 0.5*W_SedBay; W_Sed - S_Walkway] + Drainboxes_Dimensions, [0; 0; 0]*deg))
    Group ← GroupAll("DeleteMe")
    Subtract ← SubtractF(["Walkway"], "DeleteMe")
    for i ∈ 0 .. last(Y_FlocDrainValves)
        FlocDrainBoxes ← stack(FlocDrainBoxes, BoxF([Plant_Origin[0] - T_PlantWall - L_Sed; Y_FlocDrainValves[i]; W_Sed - S_Walkway], [Plant_Origin[0] - T_PlantWall - L_Sed; Y_FlocDrainValves[i]; W_Sed - S_Walkway] + FlocDrainboxes_Dimensions, [0; 0; 0]*deg))
    Group ← GroupAll("DeleteMe")
    Subtract ← SubtractF(["Walkway"], "DeleteMe")
    return stack(WalkwayLayer, WalkwayBox, DrainBoxes, FreezeWalkwayBox, DrainBoxes, Group, Subtract)
# [component: inputs stack(Walkway_Script)]
