# [reference: MasterProgram.xmcd]
SedBayDivider_Origin := [Plant_Origin[0]; Plant_Origin[1] + W_Sed/2 - T_ChannelWall/2; Plant_Origin[2]]
SedBayDivider_Dim := [
    SedBayDivider_Origin[0] - L_Sed;
    SedBayDivider_Origin[1] + W_SedBayDivider;
    SedBayDivider_Origin[2] + H_SedBayDivider
]
Sedbaydividerscript :=
    layer5 ← layer_new("sedbaydivider", grey)
    view ← viewtop1
    box1 ← box(SedBayDivider_Origin, SedBayDivider_Dim)
    layerset ← layer_set("0")
    layerfreeze5 ← layer_freeze("sedbaydivider")
    one ← stack(layer5, view, box1, layerset, layerfreeze5)
    return one
# [component: inputs Sedbaydividerscript]
