# Flocculation Function
# The Flocculator program should be calculating the spacing between baffles for all sections. the number of baffles in each section and the placement of the baffles throughout the flocculator.
# References:
HW_Sed := 2*m
# The length of one channel of the flocculator is equal to the length of a sed tank . Therefore the total length is equal to the number of channels times the length of a sed tank. The width of a flocculator is equal to the width of a sed tank divided by the number of channels (to make "upward velocity" equal in the two tanks. The water depth at the end of the flocculaor must be the same as the water depth in the sed tank.
# [reference: BasicInputs.xmcd]
# [reference: ExpertInputs.xmcd]
# [reference: DesignAssumptions.xmcd]
# [reference: MathFunctions.xmcd]
# [reference: PipeDatabase.xmcd]
# [reference: MinorLossCoefficients.xmcd]
# [reference: FluidsFunctions.xmcd]
# [reference: Influent Sed Manifold.xmcd]
# [reference: SludgeDrain.xmcd]
# [reference: Sedimentation Dimensions.xmcd]
# [reference: Inlet Channel.xmcd]
# [reference: Launder.xmcd]
# [reference: Exit Channel.xmcd]
# [reference: Lamella.xmcd]
# [reference: Floc Hopper.xmcd]
# [reference: EntranceTankDim.xmcd]
# Floc Calculations:
HW_FlocEnd := HW_Sed = 2 m
S_FlocBaffleEnd := 1/2*HW_FlocEnd = 1 m
W_FlocChannel := max(2*Q_Plant/HW_FlocEnd*(K_FlocBaffle180/(2*Pi_Epsilon*HW_FlocEnd*ED_Floc[last(ED_Floc)]))^(1/3), W_FlocChannelMin) = 71.9212 cm
Pi_FlocBaffleCP := (K_FlocBaffle180*(Pi_Epsilon*HW_FlocEnd)^2/2)^(1/3) = 1.78053 m^(2/3)  # Collision potential per baffle
# We can tweak these Pi terms to get the baffle distribution that we like and the head loss that we like
# The Pi terms determine at what fraction of the total collision potential does the energy dissipation rate start to drop and at what energy dissipation rate does it level off again.
ED_Function(n_Baffles) :=
    Pi ← [0.4; 0.7]
    m ← (ED_Floc[0] - ED_Floc[1])/((Pi[0] - Pi[1])*CP_Floc/Pi_FlocBaffleCP)
    b ← ED_Floc[0] - m*Pi[0]*CP_Floc/Pi_FlocBaffleCP
    ED_Function ← ED_Floc[0] if n_Baffles ≤ Pi[0]*CP_Floc/Pi_FlocBaffleCP
    ED_Function ← m*n_Baffles + b if n_Baffles > Pi[0]*CP_Floc/Pi_FlocBaffleCP and n_Baffles ≤ Pi[1]*CP_Floc/Pi_FlocBaffleCP
    ED_Function ← ED_Floc[1] if n_Baffles > Pi[1]*CP_Floc/Pi_FlocBaffleCP
    return ED_Function
n_BafflesMin := ceil(CP_Floc/Pi_FlocBaffleCP)
ED_Floc = [6.4; 0.4] mW/kg
n_Baffles := (0, 1 .. n_BafflesMin)
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Spacing_FlocBaffle(n_Baffles) := Q_Plant/W_FlocChannel*(K_FlocBaffle180/(2*Pi_Epsilon*HW_FlocEnd*ED_Function(n_Baffles)))^(1/3) + T_FlocBaffle
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# We sum the area under the curve to get the cumulative length of the flocculator as a function of the number of baffles
sum(S_FlocBaffle(i*Pi_FlocBaffleCP), i = 0 .. round(CP_Floc/Pi_FlocBaffleCP))/L_Sed =  # error: This variable is undefined.
CumulativeChannelLength[n_Baffles] := sum(Spacing_FlocBaffle(i), i = 0 .. n_Baffles)
CumulativeChannels := CumulativeChannelLength/L_Sed
CumulativeBaffles[n_Baffles] := n_Baffles  # makes an array from a range variable
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# Switch the axis and divide by the channel length to show the cumulative number of baffles as a function of the number of channels
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CP_Floc/Pi_FlocBaffleCP = 61.7793
# Use linear interpolation to find the cumulative number of baffles as a function of the channel number
N_FlocChannels := ceil(linterp(CumulativeBaffles, CumulativeChannels, n_BafflesMin)) = 5  # Use this function to get the total number of channels required.
Channels := 0 .. N_FlocChannels - 1  # range variable for the floc channels
# take cumulative number of baffles in a channel minus the cumulative number of baffles in the previous channel to get the number of baffles in a channel. The factors of 2 ensure that we get an even number of baffles. Subtract 1 to get the number of baffles required to create the required number of energy dissipation zones.
BafflesPerChannel(ChannelNumber) := 2*round((linterp(CumulativeChannels, CumulativeBaffles, ChannelNumber) - linterp(CumulativeChannels, CumulativeBaffles, ChannelNumber - 1))/2) - 1
N_FlocChannelBaffles[Channels] := BafflesPerChannel(Channels + 1)  # Define an array with the number of baffles in each channel
N_FlocChannelBaffles = [21; 17; 9; 9; 9]  # This is the number of baffles (not the number of spaces)
TotalBaffles := sum(N_FlocChannelBaffles) = 65
# Now we need to calculate the following for each channel
# baffle center to center distance
# baffle separation distance
# head loss in each channel
# Divide the total available space evenly. First subtract the space occupied by the baffles and then divide by the number of spaces.
S_FlocBaffle := (L_Sed - N_FlocChannelBaffles*T_FlocBaffle)/(N_FlocChannelBaffles + 1) = [0.394919; 0.491568; 0.916822; 0.916822; 0.916822] m
B_FlocBaffle := S_FlocBaffle + T_FlocBaffle  # center to center distance
HL_FlocBaffle := h_erect(Q_Plant, W_FlocChannel, S_FlocBaffle, K_FlocBaffle180) = [6.32003; 4.07914; 1.17264; 1.17264; 1.17264] mm
# head loss per baffle in each channel
# total head loss per channel
HL_FlocChannels := vectorize(HL_FlocBaffle*(N_FlocChannelBaffles + 1)) = [13.9041; 7.34245; 1.17264; 1.17264; 1.17264] cm
HL_Floc := HL_FlocBaffle*(N_FlocChannelBaffles + 1) = 24.7644 cm  # total head loss in the flocculator
HW_FlocStart := HW_FlocEnd + HL_Floc = 2.24764 m
# Here we are assuming that the entire flocculator has extra tall walls. BUt that isn't necessary. Only the first two channels need to have tall walls. This needs to be fixed!
H_Floc := HW_FlocStart + H_PlantFreeboard = 2.34764 m
L_FlocTank := N_FlocChannels*L_Sed = 47.6411 m  # Total length of floc tanks
Ti_Floc := HW_FlocEnd*L_FlocTank*W_FlocChannel/Q_Plant = 22.8427 min
W_FlocPort := S_FlocBaffle = [39.4919; 49.1568; 91.6822; 91.6822; 91.6822] cm
# The width of the floc port that connects channels will be based on the baffle spacing in that channel
# This is the actual energy dissipation rate in each channel
ED_FlocChannel := K_FlocBaffle180/(2*HW_FlocEnd*Pi_Epsilon)*(Q_Plant/(S_FlocBaffle*W_FlocChannel))^3 = [6.49435; 3.36752; 0.519045; 0.519045; 0.519045] mW/kg
H_FlocPort := W_FlocChannel = 0.719212 m
# This keeps the energy dissipation rate through the ports the same as through the baffles since the dimension of the port is actually exactly the same as the dimension through the baffles
W_GritWeir := 15 cm  # This length needs to be defined by the floating floc team.
# Now we need to assign positions, lengths and elevations to floc baffles
L_FlocBaffleLower := HW_FlocEnd - S_FlocBaffle*Pi_FlocBaffle = [1.60508; 1.50843; 1.08318; 1.08318; 1.08318] m
# H.Floc should be an array with an element for each channel
L_FlocBaffleUpper := H_Floc - S_FlocBaffle*Pi_FlocBaffle = [1.95273; 1.85608; 1.43082; 1.43082; 1.43082] m
# Reiko I have edited to here. The loops below need to be simplied now that the channels have uniform spacing. I believe that the new code will be much simpler and can be handled using arrays.
L_BaffleSection :=
    for i ∈ 0 .. last(N_FlocBaffleSectionRequired)
        L[i] ← N_FlocBaffleSectionRequired[i]*B_FlocBaffle[i]
    return L
    = [13.5424; 32.24] m  # This calculates the length of flocculator taken up by each section of baffles
# I think this needs to be updated based on channel length now
# First baffle is a lower baffle because rapid mix pipe enters low
# Ideally have odd number of baffles in first channel (enter low, exit low)
# Ideally have even number of baffles in 2nd channel (enter low, exit high), but I haven't done any coding to get the right number of baffles (odd or even). The fit of the baffles could potentially be improved by
Loc_FlocBaffles :=
    X[0, N_FlocChannels - 1] ← 0*m
    L[0, N_FlocChannels - 1] ← 0*m
    Z[0, N_FlocChannels - 1] ← 0*m
    section ← 0
    BafflesInSection ← 0
    N_FlocBaffles ← 0
    N_FlocDrainPort ← 0
    W_RapidMix ← W_GritWeir
    X[0, 0] ← T_ChannelWall
    for Channel ∈ 0 .. N_FlocChannels - 1
        i ← 0
        j ← 0
        Baffles ← 0
        Loc_FlocPortSide[0, Channel] ← 1
        X_FirstBaffleInChannel ← W_GritWeir if Channel == 0
        X_FirstBaffleInChannel ← W_FlocPort[section] otherwise
        X[i, Channel] ← X_FirstBaffleInChannel
        L[i, Channel] ← L_FlocBaffleUpper[section]
        Z[i, Channel] ← 0*m
        while Baffles < N_FlocChannelBaffles[Channel]
            i ← i + 1
            N_FlocBaffles ← N_FlocBaffles + 1
            Baffles ← Baffles + 1
            X[i, Channel] ← X[i - 1, Channel] + B_ChannelBaffleSpace[Channel]
            if mod(i, 2) == 0
                L[i, Channel] ← L_FlocBaffleUpper[section]
                Z[i, Channel] ← S_FlocBaffle[section]*Pi_FlocBaffle
            otherwise
                j ← j + 1
                L[i, Channel] ← L_FlocBaffleLower[section]
                Z[i, Channel] ← 0*m
                N_FlocDrainPort ← N_FlocDrainPort + 1
                Loc_FlocPortSide[j, Channel] ← 1 if mod(i, 4) == 0
                Loc_FlocPortSide[j, Channel] ← 2 otherwise
        section ← section + 1 if Channel > 0 and B_ChannelBaffleSpace[Channel] ≠ B_ChannelBaffleSpace[Channel - 1]
        for k ∈ 0 .. last(X[:, 0])
            X[k, Channel] ← L_Sed - X[k, Channel] if mod(Channel + N_FlocChannels, 2) == 1 and X[k, Channel] ≠ 0
    return [X, L, Z, N_FlocBaffles*m, Loc_FlocPortSide*m, N_FlocDrainPort*m]
# section is index of the spacing of baffles
# First baffle is away from wall to allow elbow to deflect water downward
# This code works with any number of flocculator channels
# i is the number of baffles in a channel
# X placement starts with an offset equal to the channel wall thickness
# The first baffle is place in the channel by an offest required for the
# rapid mix apparatus. Which is subject to change?!
# j is the index that counts lower baffles only
# PortSide keeps track of what side the port in the baffle will be on. These ports will be used for draining the floc tank.
# Each channel starts with a lower baffle
# Move to the next spacing if baffles in section equals target number of baffles in section and if the section isn't the last section
# Mod handles the odd and even baffles
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# Mod = 1 means the number is odd
# Mod = 0 means the numbeer is even
# Reverse the direction of odd numbered channels
[X, L, Z, N_FlocBaffle*m, PortSide*m]
# Do we need to reverse the Z array too?
# Lower baffles are on even indexes, so every fourth baffle (second lower baffle) will have ports on the same side so that they alternate sides and don't shortcircuit the flow.
# Count the number of drain ports by counting the number of lower floc baffles.
# artificially attach units of meters to the number of baffles so all dimensions are the same.
X ← L_Sed - X if mod(N_FlocChannels, 2) == 1
# For some reason it's giving 1 extra baffle
X_FlocBaffles := Loc_FlocBaffles[0, 0]
N_FlocChannelBaffles = [21; 17; 9; 9; 9]
L_FlocBaffles := Loc_FlocBaffles[0, 1]
Z_FlocBaffles := Loc_FlocBaffles[0, 2]
# strip artificial units
# These values don't match what was calculated early. The problem is somewhere within the code above.
N_FlocBaffles := Loc_FlocBaffles[0, 3]/m
X_FlocBaffles =  # error
Loc_FlocPortSide := Loc_FlocBaffles[0, 4]/m
N_FlocBaffles =  # error
N_FlocDrainPort := Loc_FlocBaffles[0, 5]/m = 32
# Reiko, The drain calculations are actually rather complicated. The water has to flow through all of the tanks in series and the result is that the drain size needs to be made rather large. I worked on equations for this when we designed the Marcala plant.
# Drains are added to each flocculator channel so they can be drained.
# The side that the ports are located on the lower baffles is determined above, and is labeled Loc.FlocPortSide
# For an individual floc channel
Q_FlocDrain := W_FlocChannel*L_Sed*HW_FlocStart/Ti_SludgeDrain = 25.6711 L/s  # Use the same drain time as the sed tank. Correct assumption??
ID_FlocDrainPort := ID_Manifold(Q_FlocDrain, HW_FlocStart, L_Sed, Pi_QSludgeOrifices, EN_PipeSpec, Nu_Water, E_Pvc, 0, N_FlocDrainPort) = 4.30619 in
A_FlocDrain := π/4*ID_FlocDrainPort^2 = 93.9603 cm^2
# If head is constant within each flocculator, we can treat each port as an orifice. Therefore we can use the manifold equation to calculate the total port size needed to drain the tank, and then divide that by the number of ports.
A_FlocDrainPort := A_FlocDrain/N_FlocDrainPort = 2.93626 cm^2
# Is this valid?? Should the flocculator actually be considered a series of separate tanks??
W_FlocDrainPort := sqrt(A_FlocDrainPort) = 1.71355 cm
# Assume square ports for the flow to drain out of
H_FlocDrainPort := W_FlocDrainPort
Q_FlocDrainInitial := Q_orifice(ID_FlocDrainPort, HW_FlocStart, Pi_VenaContractaOrifice) = 39.3029 L/s
