Π_Lfomorifice := 10
N_rows := Π_Lfomorifice = 10
Row_height := H_dmax/N_rows
D_LfomOrificeMax := Row_height
# First: Calculate the minimum diameter of the LFOM pipe:
# 1.  A stout is a theoretical weir with width proportional to 1/sqrt(height).  Practically this is impossible to create because width goes to infinity as height goes to zero.  However, this gives the equation that both the LFOM and sutro weir look to copy.  Therefore we use the stout weir equation to model the LFOM y(x) = α/sqrt(x) = α*basicY(x).  However, first note that 1/sqrt(x) has unitsm^-.5 insteat of units of m (as width should) so we need to correct for units by multiplying by 1 m^1.5
basicY(x) := m^1.5/sqrt(x)
# 2. We Solve for alpha using the flow equation flow(height)= Pi_VenaContractaOrifice*integral(sqrt(2*g*(height - x))*basicY(x), x = 0 .. height) at max height and setting equal to Q_Plant.
Flow_overAlpha := sqrt(2*g)*Pi_VenaContractaOrifice*integral(sqrt(H_dmax - x)*basicY(x), x = 0 m .. H_dmax)
α := Q_Plant/Flow_overAlpha
α =  # error: This variable is undefined.
y(x) := α*basicY(x)
# 3. To calculate  calculate the average velocity at the bottom we weight the falling velocity from each height sqrt(2*g*height) by the amount of flow at that height and deviding by Q_Plant
#
# Thus we get:
SummedVelocity := 2*g*Pi_VenaContractaOrifice*integral(sqrt(x*(H_dmax - x))*y(x), x = 0 m .. H_dmax)
AverageVelocity := SummedVelocity/Q_Plant
AverageVelocity =  # error
# 4. we need the average velocity at the bottom to be greater than the Q.Plant/Area, so we can then solve for minArea and thus the minimum diameter
minArea := Q_Plant/AverageVelocity
Π_Safety := 2
safeMinArea := Π_Safety*minArea
MinDiameter := 2*sqrt(safeMinArea/π)
MinDiameter =  # error
ND_Lfom := NominalDiameter(MinDiameter, EN_PipeSpec)
ND_Lfom =  # error
ND_Lfom =  # error
ND_Rm := ND_Lfom
D_LfomOrifices := FloorNearest(D_LfomOrificeMax, D_Drill)
D_LfomOrifices =  # error
r := D_LfomOrifices/2
Area := π*r^2*Pi_VenaContractaOrifice
H_OrificeCenter := Row_height/2
MaxOrifice_perRow := floor(2*π*ND_Lfom/(2*D_LfomOrifices))
H_LfomOrifice :=
    array[N_rows - 1] ← 0
    for i ∈ 0 .. last(array)
        array[i] ← i*Row_height + H_OrificeCenter
    return array
H_LfomOrifice =  # error
FlowOutSingle(RowIn, RowOut) :=
    heightDiff ← (RowIn - RowOut)*Row_height + H_OrificeCenter
    heightDiff ← 0 if heightDiff < 0
    Velocity ← sqrt(2*g*heightDiff)
    Q_singleOrifice ← Velocity*Area
    return Q_singleOrifice
# this takes the value of the row number directly above the water level and tell the amount of water flowing out of the RowOut row note that FlowOutRow(i, i) = 0
# this sums all of the flow out of the different rows below the level of the input
FlowOutSingle(1, 1) =  # error
TotalFlow_fromRowNumber(RowNumber, Orificearray) :=
    total ← 0
    for i ∈ 0 .. RowNumber
        total ← total + FlowOutSingle(RowNumber, i)*Orificearray[i]
    return total
TotalFlow_vector(orificeArray) :=
    OutFlow[last(orificeArray)] ← 0
    for i ∈ 0 .. last(OutFlow)
        OutFlow[i] ← TotalFlow_fromRowNumber(i, orificeArray)
    return OutFlow
Q_Plant =  # error
H_dmax =  # error
N_rows = 10
TempOrificeArray[N_rows - 1] := 0
TempOrificeArray = [0; 0; 0; 0; 0; 0; 0; 0; 0; 0]
IdealOutflow(TotalFlow, NumRows) :=
    Flow[NumRows] ← 0
    for i ∈ 0 .. last(Flow)
        Flow[i] ← (i + 1)*TotalFlow/(NumRows + 1)
    return Flow
TargetFlow := IdealOutflow(Q_Plant, N_rows - 1)
TargetFlow[0]/FlowOutSingle(1, 1) =  # error
MSE(flowArray) :=
    sum ← 0
    for i ∈ 0 .. last(flowArray)
        sum ← sum + (flowArray[i] - TargetFlow[i])^2
    return sum
pickBetterEstimator(testingArray, bestArray) :=
    testingFlow ← TotalFlow_vector(testingArray)
    bestFlow ← TotalFlow_vector(bestArray)
    toReturn ← testingArray if MSE(bestFlow) > MSE(testingFlow)
    toReturn ← bestArray otherwise
    return toReturn
pickBottom(testingArray, level) :=
    previousFlow ← TotalFlow_fromRowNumber(level, testingArray)
    additionalFlow ← TargetFlow[level] - previousFlow
    bottom ← floor(additionalFlow/incrementHoleOnLevel)
    bottom ← max(0, bottom)
    bottom ← min(MaxOrifice_perRow - 1, bottom)
    return bottom
recurseEstimator(testingArray, bestArray, level) :=
    toReturn ← pickBetterEstimator(testingArray, bestArray) if level > last(testingArray)
    otherwise
        if level ≤ last(testingArray)
            bottom ← pickBottom(testingArray, level)
            for i ∈ bottom .. bottom + 1
                tempArray ← testingArray
                tempArray[level] ← i
                bestArray ← recurseEstimator(tempArray, bestArray, level + 1)
            toReturn ← bestArray
    return toReturn
BestEstimate := recurseEstimator(TempOrificeArray, TempOrificeArray, 0)
N_LfomOrifices := BestEstimate
FlowBestEstimate := TotalFlow_vector(BestEstimate)
FlowBestEstimatewithZERO :=
    temp[rows(FlowBestEstimate)] ← 0
    for i ∈ 1 .. last(temp)
        temp[i] ← FlowBestEstimate[i - 1]
    return temp
TargetFlowwithZERO :=
    temp[rows(TargetFlow)] ← 0
    for i ∈ 1 .. last(temp)
        temp[i] ← TargetFlow[i - 1]
    return temp
ToGraph := FlowBestEstimatewithZERO
TestLocations(array) :=
    temp[last(array)] ← 0
    for i ∈ 0 .. last(temp)
        temp[i] ← i*Row_height
    return temp
IdealGraph := TargetFlowwithZERO
xi := 0 .. last(ToGraph)
H_testlocations := TestLocations(ToGraph)
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GraphDiff := ToGraph - IdealGraph
AbsArray(array) :=
    graph[last(array)] ← 0
    for i ∈ 0 .. last(array)
        graph[i] ← |array[i]|
    return graph
TestDifference := AbsArray(GraphDiff)
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