# [reference: BasicInputs.xmcd]
# [reference: ExpertInputs.xmcd]
# [reference: MathFunctions.xmcd]
# [reference: PipeDatabase.xmcd]
# [reference: FluidsFunctions.xmcd]
# [reference: SedimentationTank.xmcd]
# CFD results and functions
Pi_VCBaffle := 1/(sqrt(K_FlocBaffle) + 1) = 0.414214
Q_Transition := ED_Floc^(1/3)*W_HumanMin*(1.6 m)^(4/3)*Pi_Jet^3/(K_FlocBaffle^(1/3)*Pi_VCBaffle^2) = 71.6197 L/s
Pi_JSGraph := 2 .. 40  # Used to create the graphs
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# This is the efficiency of the geometry
α_ψ(Pi_JS) := min((4*Pi_Jet^3/(Pi_VCBaffle^2*K_FlocBaffle))^(1/6), (4/Pi_JS)^(1/6))
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α_ε(Pi_JS) := max(2, Pi_Jet^3/Pi_VenaContractaOrifice^4*2/K_FlocBaffle*Pi_JS)
# Changed the jet max energy dissipation rate coefficient from 0.34 to 0.38 to better match CFD results. This needs further verification by PIV, literature on plane jets, or CFD.
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ψ_P(J, S) := α_ψ(J/S)*J^(2/3)*(K_FlocBaffle/2)^(1/3)
# Generic
# Ρ
# S
# J
# Vertical
# Width
# Space
# Height
# Horizontal
# Height
# Space
# Width
S_FlocBaffleMin := W_HumanMin = 0.6 m
J(P, S) := P*S
J_Min := J(Pi_JSOptimal, S_FlocBaffleMin) = 1.8 m
H_MaxHorizontal(Q, S, Pi_JS, ED, J) := Q/(S*(J*2*ED/(K_FlocBaffle*α_ε(Pi_JS)))^(1/3))
HW_FlocEndEst :=
    HW_Sed if H_FlocOption == 0
    H_MaxHorizontal(Q_Plant, S_FlocBaffleMin, Pi_JSOptimal, ED_Floc, J_Min) if H_FlocOption == -1
    H_FlocOption*m if H_FlocOption > 0
# This gives the number of spaces per channel for a horizontal flocculator. Floor to ensure minimum spacing constraint met for horizontal. Subtracting 1 forces it to be odd. Add one before flooring though to get more accurate estimate.
N_FlocSpacesFH(L, T, S) := (Floor((L + T)/(S + T) + 1, 2) - 1)
SofN_FlocBaffleF(L, T, N_Spaces) := (L + T)/N_Spaces - T  # This calculates the spacing between baffles given a number of spaces in a channel.
S_FlocBaffleNonIterative(Q, P, Pi_JS, ED) := (Q/P)^(3/4)*(1/Pi_JS)^(1/4)*(K_FlocBaffle*α_ε(Pi_JS)/(2*ED))^(1/4)
# This equation can be used to find the space between baffles when everything else is known.
S_FlocBaffleCalcH := SofN_FlocBaffleF(L_Sed, T_FlocBaffleRigidH, N_FlocSpacesFH(L_Sed, T_FlocBaffleRigidH, S_FlocBaffleNonIterative(Q_Plant, HW_FlocEndEst, Pi_JSOptimal, ED_Floc))) = 0.153425 m
N_FlocSpacesPerChannelH := N_FlocSpacesFH(L_Sed, T_FlocBaffleRigidH, S_FlocBaffleCalcH) = 21
HW_FlocEnd :=
    H_MaxHorizontal(Q_Plant, S_FlocBaffleCalcH, Pi_JSOptimal, ED_Floc, J(Pi_JSOptimal, S_FlocBaffleCalcH)) if H_FlocOption == -1
    HW_FlocEndEst otherwise
    = 1.86783 m
Q_MinHorizontal(P, S, Pi_JS, ED, J) := P*S*(J*2*ED/(K_FlocBaffle*α_ε(Pi_JS)))^(1/3)
Q_MinHorizontal(HW_FlocEnd, S_FlocBaffleMin, Pi_JSOptimal, ED_Floc, J_Min) = 233.115 L/s
EN_FlocHoriz :=
    EN_FlocHoriz ← 1 if Q_Plant ≥ Q_MinHorizontal(HW_FlocEnd, S_FlocBaffleMin, Pi_JSOptimal, ED_Floc, J_Min) and H_FlocOption > -1
    EN_FlocHoriz ← 1 if H_FlocOption == -1
    EN_FlocHoriz ← 0 otherwise
# recursive function | For vertical, you have to iterate to find the spacing.
S_FlocBaffleIterative(Q, W, J, S, ED) := (K_FlocBaffle*α_ε(J/S)/(2*J*ED))^(1/3)*Q/W
# Monroe put this in to make a later step more clear for vertical. It's just a rearrangement of the above equation.
W_FlocChannelV(Q, J, S, ED) := (K_FlocBaffle*α_ε(J/S)/(2*J*ED))^(1/3)*Q/S
W_FlocChannelMinRigidBaffleV := W_FlocChannelV(Q_Plant, HW_FlocEnd, S_FlocBaffleMin, ED_Floc)
