# Only parameters with units need to be entered in this file. The units must be attached as SI (meters, kg, s, rad). DO NOT USE ANY OTHER UNITS!!!! NO mW, no cm, no degrees!!!!
## Flocculation Design
CP_Floc := CP_Floc*m^(2/3)
ED_Floc := ED_Floc*W/kg
W_FlocChannelMin := W_FlocChannelMin*m
Pi_FlocDissipation := 2
H_FlocOverlapMin := 0*m  # not given by ADT
S_FlocPort := S_FlocPort*m
Pi_FlocBaffle := Pi_FlocBaffle
## Sed Design
HW_SedEst := 2 m  # not given by ADT
ED_SedInlet := ED_SedInlet*W/kg
# This is the maximum energy disipation rate in the channels that transfer the water from the floc tank to the sedimentation tank
Pi_FlowManifold := Pi_FlowManifold
V_SedUpBod := V_SedUpBod*m/s  # Ratio of min to max flow through ports in inlet manifold
V_SedCBod := V_SedCBod*m/s
# Maximum upflow velocity to allow sludge blanket formation
# We assume a maximum critical velocity for particles to settle in plate settlers
H_SedBetween := 0*m
AN_SedTopInlet := AN_SedManifoldTop*rad
# Critical velocity must be low enough to allow for almost all
# of the particles to settle out
AN_SedBottom := AN_SedManifoldBottom*rad
AN_SedBottomInlet := AN_SedManifoldBottom*rad
W_SedSludgeSF := W_SedSludgeOverlap*m
AN_SedPlate := AN_SedPlate*rad
W_SedSludgeFlat := W_SedSludgeFlat*m
B_SedPlateMin := S_SedPlateMin*m + T_SedPlate
# The user should be specifying the spacing between plates to avoid potential conflicts if they choose a thick plate and a narrow space.
N_SedLaunders := N_SedLaunders
Pi_Launder := Pi_FlowLaunder
HL_SedLaunderBod := HL_SedLaunderBod*m
Pi_QLaunderOrifices := Pi_FlowLaunder
B_SedLaunderOrifices := B_SedLaunderOrifices*m
Pi_QSludgeOrifices := Pi_FlowSludge
## Inlet Channel
HW_InletChannelMax := HW_InletChannelMax*m
## Floc Hopper
V_UpFlocHopper := V_UpFlochopper*m/s
## Entrance Tank
V_EtUp := V_EtUp*m/s
ED_DiffusionMin := ED_DiffusionMin*W/kg
ED_FlocEntryOrifice := ED_FlocEntryOrifice*W/kg
HW_EtMax := 20 cm
