# [reference: BasicInputs3Sed1Bay.xmcd]
# [reference: ExpertInputs.xmcd]
# [reference: DesignAssumptions.xmcd]
# [reference: MathFunctions.xmcd]
# [reference: PipeDatabase.xmcd]
# [reference: MinorLossCoefficients.xmcd]
# [reference: FluidsFunctions.xmcd]
# [reference: Sedimentation Tank.xmcd]
# [reference: Floc Hopper - New Design.xmcd]
# [reference: FCM.xmcd]
Pi_HbMin := 3  # Should go into Basis of Design. Doesn't really need to be accesible even to experts. Ratio of water depth to spacing between baffles.
# The new flocculation model more carefully distinguishes between maximum and average energydissipation rates. The flocculators should be designed based on a maximum allowed energy dissipation rate to ensure that suboptimal geometry (high h/b ratios) doesn't result in excessively high energy dissipation rates that could break flocs. However, since this model is now incorporating the concept of a maximum energy dissipation rate the energy dissipation rate guidelines need to be increased to account for the distinction between average and maximum.
# Because we are now using the concept of a maximum energy dissipation rate it should be possible to directly incorporate results from laminar flow flocculators to produce guidelines on the maximum allowable energy dissipation rates. One caveat is that the turbulent flow energy dissipation rates are time averaged and it is not yet clear what the expected temporal variability is for turbulent flow energy dissipation rates.
# CFD results and functions
# all design values from Yi, Wenqi, 2009
# The fraction of the maximum collision potential that could be achieved if the energy dissipation rate was uniformly distributed. Or, if this fraction of the available energy were uniformly distributed the collision potential would be the same as what it is given the nonuniformity in the energy dissipation rate distribution.
# ratio of water depth to baffle spacing
# Note that this data (ψ.Pdat) can not be used directly in design because it has units! It only applies to the case for b=0.1m (the case used in the CFD FLUENT analysis).
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ψ_Pdat := [0.49962; 0.65143; 0.67122; 0.71292; 0.89548; 1.00041; 1.24420; 1.45759; 2.15668]*m^(2/3)
Pi_HBdat := [2; 3; 4; 5; 8; 10; 15; 20; 40]  # h/b*values
α_ψdat := [0.65; 0.86; 0.87; 0.85; 0.71; 0.64; 0.53; 0.46; 0.33]
# The maximum energy dissipation rate is loosely defined as the the maximum energy dissipation rate that is seen by a significant fraction of the flow. We don't have a good way to characterize this parameter analytically yet, but I estimated this using the color contours of the energy dissipation rate (data from Yi, Wenqi, 2009). Note the very large values of this ratio for high h/b ratios. High h/b ratios have very nonuniform energy dissipation rates.
# Minor loss coefficient. This many equivalents of the kinetic energy are lost through one baffle. Note that the minor loss coefficient is very large for small h/b values
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K_Pdat := [9.60; 7.17; 4.32; 3.42; 3.15; 3.13; 3.22; 3.39; 3.84]
α_εdat := [1.875617391; 1.808368729; 1.776938668; 1.927164849; 3.356408643; 4.221784408; 6.332676611; 7.793864103; 13.75322341]
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α_ψ(Pi_HB) := linterp(Pi_HBdat, α_ψdat, Pi_HB)  # These functions use linear interpolation to create functional relationships as a function of the h/b ratios
α_ε(Pi_HB) := linterp(Pi_HBdat, α_εdat, Pi_HB)
K_P(Pi_HB) := linterp(Pi_HBdat, K_Pdat, Pi_HB)
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# True for h/b>5
3^(1/3) = 1.44225
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b := 0.1*m
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# True for h/b>3
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## Flocculator Functions
# The Floor function forces the number of baffle spaces to be an  integer
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N_FlocSpacesF(L, T, S) := Floor((L + T)/(S + T), 1)
SofN_FlocBaffleF(L, T, N_Spaces) := (L + T)/N_Spaces - T
# The function below can also be used directly to solve for W by substituting S for W
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S_FlocBaffleIterative(Q, W, H, S, ED) := (K_P(H/S)*α_ε(H/S)/(2*H*ED))^(1/3)*Q/W  # recursive function
S_FlocBaffleF(Q, W, H, ED) :=
    S ← S_FlocBaffleIterative(Q, W, H, H/4, ED)
    error ← 1
    while error > 0.001
        S_new ← S_FlocBaffleIterative(Q, W, H, S, ED)
        error ← |S - S_new|/(S + S_new)
        S ← S_new
    return S
# This function returns a spacing that gives the target energy dissipation rate.
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# Collision potential per baffle (p for pantalla)
ψ_P(H, S) := (H^2*α_ψ(H/S)*K_P(H/S)/2)^(1/3)
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ED(Q, H, S, W) := α_ε(H/S)*K_P(H/S)/(2*H)*(Q/(W*S))^3
ED_Target(ψ) :=
    Pi ← [0.4; 0.7]
    m ← (ED_Floc[0] - ED_Floc[1])/((Pi[0] - Pi[1])*CP_Floc)
    b ← ED_Floc[0] - m*Pi[0]*CP_Floc
    ED_Target ← ED_Floc[0] if ψ ≤ Pi[0]*CP_Floc
    ED_Target ← m*ψ + b if ψ > Pi[0]*CP_Floc and ψ ≤ Pi[1]*CP_Floc
    ED_Target ← ED_Floc[1] if ψ > Pi[1]*CP_Floc
    return ED_Target
# This function gives a reasonable relationship between maximum energy dissipation rate and collision potential through a flocculator. This function is a placeholder until we get better information from our research teams.
#
# We can tweak these Pi terms to get the baffle distribution that we like and the head loss that we like
# The Pi terms determine at what fraction of the total collision potential does the energy dissipation rate start to drop and at what energy dissipation rate does it level off again.
# The following function cycles through each flocculator channel and checks the possible range of the number of baffles in a channel to see which number of baffles results in the correct energy dissipation rate and cumulative collision potential at the end of the channel.
N_FlocChannelSpacesF(ED_ChannelRange, ψ_ChannelRange, N_FlocSpacesMax, N_FlocSpacesMin) :=
    ψ_Cumulative ← 0
    Channel ← 0
    while ψ_Cumulative < CP_Floc
        i ← 0
        while ED_ChannelRange[i] ≤ ED_Target(ψ_ChannelRange[i] + ψ_Cumulative) and i < (N_FlocSpacesMax - N_FlocSpacesMin)
            i ← i + 1
        N_FlocChannelSpaces[Channel] ← Floor(i + N_FlocSpacesMin, 2)
        i ← N_FlocChannelSpaces[Channel] - N_FlocSpacesMin
        ψ_Cumulative ← ψ_Cumulative + ψ_ChannelRange[i]
        Channel ← Channel + 1
    N_FlocChannelSpaces[last(N_FlocChannelSpaces)] ← N_FlocChannelSpaces[last(N_FlocChannelSpaces)] - 1
    return N_FlocChannelSpaces
# search for number of spaces that yields dissipation rate under target
# Floor the number of spaces to get an even number
# Set i to the correct value given the actual number of spaces used
# Calculate actual collision potential
# The number of spaces in the last channel needs to be an odd
# number so that the water flows up to the exit port to
# the sed tank.
## Calculation of Flocculator Geometry
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HW_FlocEnd := HW_Sed = 1.43709 m
S_FlocBaffleMax := SofN_FlocBaffleF(L_Sed, T_FlocBaffle, N_FlocSpacesF(L_Sed, T_FlocBaffle, HW_FlocEnd/Pi_HbMin)) = 0.498778 m  # HERE *******************
W_FlocChannel := max(S_FlocBaffleIterative(Q_Plant, S_FlocBaffleMax, HW_FlocEnd, S_FlocBaffleMax, ED_Floc[last(ED_Floc)]), W_FlocChannelMin) = 45 cm
S_FlocBaffleMin := S_FlocBaffleF(Q_Plant, W_FlocChannel, HW_FlocEnd, ED_Floc[0]) = 0.0989924 m
N_FlocSpacesMin := N_FlocSpacesF(L_Sed, T_FlocBaffle, HW_FlocEnd/Pi_HbMin) - 1 = 7  # HERE *******************
# subtract one to handle the case when we reduce the number of spaces through rounding down to an odd or even integer.
N_FlocSpacesMax := N_FlocSpacesF(L_Sed, T_FlocBaffle, S_FlocBaffleMin) = 31  # HERE *******************
# Now calculate the maximum energy dissipation rate given the range of possible baffle spacings and the total collision potential for a channel full of baffles of that spacing.
i := 0 .. N_FlocSpacesMax - N_FlocSpacesMin
# Now calculate the collision potential for an entire channel for each of the possible number of baffles and the corresponding energy dissipation rate
ψ_ChannelRange[i] := ψ_P(HW_FlocEnd, SofN_FlocBaffleF(L_Sed, T_FlocBaffle, i + N_FlocSpacesMin))*(i + N_FlocSpacesMin)
ED_ChannelRange[i] := ED(Q_Plant, HW_FlocEnd, SofN_FlocBaffleF(L_Sed, T_FlocBaffle, i + N_FlocSpacesMin), W_FlocChannel)
ED_ChannelRange = [0.079811; 0.107533; 0.133931; 0.15444; 0.171755; 0.217013; 0.265346; 0.364649; 0.503888; 0.682484; 0.908396; 1.19069; 1.53965; 1.9716; 2.50934; 3.1659; 3.96276; 4.93419; 6.11487; 7.5346; 9.23531; 11.2656; 13.682; 16.5496; 19.9443] mW/kg
# Calculate the number of spaces in each channel
ψ_ChannelRange = [13.0888; 14.8774; 16.0688; 16.7447; 17.1733; 18.1055; 18.8795; 19.9954; 21.16; 22.2807; 23.3554; 24.3818; 25.3575; 26.3491; 27.4164; 28.4496; 29.4465; 30.4932; 31.5907; 32.6665; 33.719; 34.7467; 35.7477; 36.7202; 37.6619] m^(2/3)
Q_Plant = 0.0063658 m^3/s
N_FlocSpacesMax = 31
CP_Floc = 110 m^(2/3)
N_FlocSpacesMin = 7
L_Sed = 4.27023 m
N_FlocChannelSpaces := N_FlocChannelSpacesF(ED_ChannelRange, ψ_ChannelRange, N_FlocSpacesMax, N_FlocSpacesMin) = [30; 26; 20; 19]
N_FlocChannels := length(N_FlocChannelSpaces)
Channels := 0 .. N_FlocChannels - 1  # range variable for the floc channels
N_FlocChannelBaffles := N_FlocChannelSpaces - 1
N_FlocBaffles := sum(N_FlocChannelBaffles) = 91  # Total number of baffles in the flocculator
# Now we need to calculate the following for each channel
# baffle center to center distance
# baffle separation distance
# head loss in each channel
# Calculate the baffle spacing given the number of baffles in each channel
S_FlocBaffle := SofN_FlocBaffleF(L_Sed, T_FlocBaffle, N_FlocChannelSpaces) = [0.103674; 0.125778; 0.175511; 0.186854] m
# Verify that the channels are all the correct length...
vectorize(N_FlocChannelSpaces*S_FlocBaffle) + (N_FlocChannelSpaces - 1)*T_FlocBaffle = [4.27023; 4.27023; 4.27023; 4.27023] m
ED_FlocChannel[Channels] := ED(Q_Plant, HW_FlocEnd, S_FlocBaffle[Channels], W_FlocChannel)
ED_FlocChannel = [16.5496; 7.5346; 1.9716; 1.53965] mW/kg  # This is the actual energy dissipation rate in each channel
# Calculate the collision potential for each channel
CP_FlocChannel[Channels] := ψ_P(HW_FlocEnd, S_FlocBaffle[Channels])*N_FlocChannelSpaces[Channels]
CP_FlocTotal := sum(CP_FlocChannel) = 121.093 m^(2/3)
B_FlocBaffle := S_FlocBaffle + T_FlocBaffle  # center to center distance
HL_FlocBaffle := K_P(HW_FlocEnd/S_FlocBaffle)*Q_Plant^2/(2*g*(S_FlocBaffle*W_FlocChannel)^2) = [0.00303719; 0.00203522; 0.00104273; 0.000928653] m
# head loss per baffle in each channel
HL_FlocChannels := vectorize(HL_FlocBaffle*(N_FlocChannelBaffles + 1)) = [0.0911157; 0.0529158; 0.0208546; 0.0176444] m  # total head loss per channel
HL_Floc := HL_FlocBaffle*N_FlocChannelSpaces = 18.253 cm  # total head loss in the flocculator
HW_FlocStart := HW_FlocEnd + HL_Floc = 1.61962 m
# Here we are assuming that the entire flocculator has extra tall walls. But that isn't necessary. The walls could be different heights for each channel.
H_Floc := HW_FlocStart + H_PlantFreeboard = 1.71962 m
L_FlocTank := N_FlocChannels*L_Sed = 17.0809 m  # Total length of floc tanks
Ti_Floc := HW_FlocEnd*L_FlocTank*W_FlocChannel/Q_Plant = 28.9204 min
# The width of the floc port that connects channels will be based on the baffle spacing in that channel
W_FlocPortEst := S_FlocBaffle = [10.3674; 12.5778; 17.5511; 18.6854] cm
H_FlocPortEst := W_FlocChannel = 0.45 m
# This keeps the energy dissipation rate through the ports the same as through the baffles since the dimension of the port is actually exactly the same as the dimension through the baffles
A_FlocPort := W_FlocPortEst*H_FlocPortEst
W_FlocPort := W_FlocPortEst - S_FlocChannel
H_FlocPort := A_FlocPort/W_FlocPort
## Position calculations for each baffle
# Now we need to assign positions, lengths and elevations to floc baffles
L_FlocBaffleLower := HW_FlocEnd - S_FlocBaffle*Pi_FlocBaffle = [1.33342; 1.31132; 1.26158; 1.25024] m
# H.Floc should be an array with an element for each channel
L_FlocBaffleUpper := H_Floc - S_FlocBaffle*Pi_FlocBaffle = [1.61595; 1.59385; 1.54411; 1.53277] m
X_FlocBaffles :=
    for channel ∈ 0 .. N_FlocChannels - 2
        for i ∈ 0 .. N_FlocChannelBaffles[channel] - 1
            x[i, channel] ← S_FlocBaffle[channel] + B_FlocBaffle[channel]*i
    if (S_FlocChannel + W_InletChannel) > S_FlocBaffle[last(S_FlocBaffle)] and (2*S_FlocBaffle[last(S_FlocBaffle)]) > (S_FlocChannel + W_InletChannel)
        S_FlocBaffle[last(S_FlocBaffle)] ← SofN_FlocBaffleF(L_Sed - W_InletChannel + W_FlocPort[last(W_FlocPort)] - 2*S_FlocChannel, T_FlocBaffle, N_FlocChannelSpaces[last(N_FlocChannelSpaces)])
        for i ∈ 0 .. N_FlocChannelBaffles[last(N_FlocChannelBaffles)] - 1
            x[i, N_FlocChannels - 1] ← (S_FlocBaffle[last(S_FlocBaffle)] + T_FlocBaffle)*i + S_FlocChannel + W_InletChannel
        x[i, N_FlocChannels - 1]
    if (S_FlocChannel + W_InletChannel) > (2*S_FlocBaffle[last(S_FlocBaffle)])
        N_FlocChannelSpaces[last(N_FlocChannelSpaces)] ← N_FlocChannelSpaces[last(N_FlocChannelSpaces)] - 2
        N_FlocChannelBaffles[last(N_FlocChannelBaffles)] ← N_FlocChannelBaffles[last(N_FlocChannelBaffles)] - 2
        S_FlocBaffle[last(S_FlocBaffle)] ← SofN_FlocBaffleF(L_Sed - 2*S_FlocChannel, T_FlocBaffle, N_FlocChannelSpaces[last(N_FlocChannelSpaces)])
        for i ∈ 0 .. N_FlocChannelBaffles[last(N_FlocChannelBaffles)] - 1
            x[i, N_FlocChannels - 1] ← S_FlocBaffle[last(S_FlocBaffle)] + B_FlocBaffle[N_FlocChannels - 1]*i + W_InletChannel - W_FlocPort[last(W_FlocPort)]
        x[i, N_FlocChannels - 1]
    otherwise
        for i ∈ 0 .. N_FlocChannelBaffles[last(N_FlocChannelBaffles)] - 1
            x[i, N_FlocChannels - 1] ← S_FlocBaffle[channel] + B_FlocBaffle[channel]*i
        x[i, N_FlocChannels - 1]
    return x
# X array is the distance from the inside of the wall of the floc tank (on the side of the plant that has the inlet channel to the sed tank) to the face of the baffle closest to that end of the floc tank
S_FlocChannel + W_InletChannel = 0.33352 m
2*S_FlocBaffle[last(S_FlocBaffle)] = 0.373708 m
N_FlocChannels = 4
X_FlocBaffles = [
    0.103674, 0.125778, 0.175511, 0.33352;
    0.247348, 0.291556, 0.391023, 0.547392;
    0.391023, 0.457334, 0.606534, 0.761263;
    0.534697, 0.623112, 0.822045, 0.975135;
    0.678371, 0.78889, 1.03756, 1.18901;
    0.822045, 0.954668, 1.25307, 1.40288;
    0.96572, 1.12045, 1.46858, 1.61675;
    1.10939, 1.28622, 1.68409, 1.83062;
    1.25307, 1.452, 1.8996, 2.04449;
    1.39674, 1.61778, 2.11511, 2.25836;
    1.54042, 1.78356, 2.33062, 2.47224;
    1.68409, 1.94934, 2.54614, 2.68611;
    1.82776, 2.11511, 2.76165, 2.89998;
    1.97144, 2.28089, 2.97716, 3.11385;
    2.11511, 2.44667, 3.19267, 3.32772;
    2.25879, 2.61245, 3.40818, 3.54159;
    2.40246, 2.77823, 3.62369, 3.75547;
    2.54614, 2.944, 3.8392, 3.96934;
    2.68981, 3.10978, 4.05472, 0;
    2.83348, 3.27556, 0, 0;
    2.97716, 3.44134, 0, 0;
    3.12083, 3.60712, 0, 0;
    3.26451, 3.77289, 0, 0;
    3.40818, 3.93867, 0, 0;
    3.55186, 4.10445, 0, 0;
    3.69553, 0, 0, 0;
    3.8392, 0, 0, 0;
    3.98288, 0, 0, 0;
    4.12655, 0, 0, 0
] m
# Z array is the elevation of the bottom of the baffle
Z_FlocBaffles :=
    for channel ∈ Channels
        for i ∈ 0 .. N_FlocChannelBaffles[channel] - 1
            z[i, channel] ← mod(i, 2)*S_FlocBaffle[channel]
            z[i, N_FlocChannels - 1] ← mod(i + 1, 2)*S_FlocBaffle[N_FlocChannels - 1]
    return z
# For the last channel, the up/down placement of the
# baffles needed to be down at the channel port and
# up at the exit port.
Z_FlocBaffles = [
    0, 0, 0, 0.186854;
    0.103674, 0.125778, 0.175511, 0;
    0, 0, 0, 0.186854;
    0.103674, 0.125778, 0.175511, 0;
    0, 0, 0, 0.186854;
    0.103674, 0.125778, 0.175511, 0;
    0, 0, 0, 0.186854;
    0.103674, 0.125778, 0.175511, 0;
    0, 0, 0, 0.186854;
    0.103674, 0.125778, 0.175511, 0;
    0, 0, 0, 0.186854;
    0.103674, 0.125778, 0.175511, 0;
    0, 0, 0, 0.186854;
    0.103674, 0.125778, 0.175511, 0;
    0, 0, 0, 0.186854;
    0.103674, 0.125778, 0.175511, 0;
    0, 0, 0, 0.186854;
    0.103674, 0.125778, 0.175511, 0;
    0, 0, 0, 0.186854;
    0.103674, 0.125778, 0, 0;
    0, 0, 0, 0.186854;
    0.103674, 0.125778, 0, 0;
    0, 0, 0, 0.186854;
    0.103674, 0.125778, 0, 0;
    0, 0, 0, 0.186854;
    0.103674, 0, 0, 0;
    0, 0, 0, 0.186854;
    0.103674, 0, 0, 0;
    0, 0, 0, 0.186854
] m
L_FlocBaffles :=
    for channel ∈ Channels
        for i ∈ 0 .. N_FlocChannelBaffles[channel] - 1
            l[i, channel] ← L_FlocBaffleUpper[channel] if mod(i, 2) == 1
            l[i, channel] ← L_FlocBaffleLower[channel] otherwise
            l[i, N_FlocChannels - 1] ← L_FlocBaffleLower[N_FlocChannels - 1] if mod(i, 2) == 1
            l[i, N_FlocChannels - 1] ← L_FlocBaffleUpper[N_FlocChannels - 1] otherwise
    return l
# L array is the total height (length) of the baffle
# For the last channel, the length of the
# baffles needed to be changed since the
# up/down had been adjusted.
L_FlocBaffles = [
    1.33342, 1.31132, 1.26158, 1.53277;
    1.61595, 1.59385, 1.54411, 1.25024;
    1.33342, 1.31132, 1.26158, 1.53277;
    1.61595, 1.59385, 1.54411, 1.25024;
    1.33342, 1.31132, 1.26158, 1.53277;
    1.61595, 1.59385, 1.54411, 1.25024;
    1.33342, 1.31132, 1.26158, 1.53277;
    1.61595, 1.59385, 1.54411, 1.25024;
    1.33342, 1.31132, 1.26158, 1.53277;
    1.61595, 1.59385, 1.54411, 1.25024;
    1.33342, 1.31132, 1.26158, 1.53277;
    1.61595, 1.59385, 1.54411, 1.25024;
    1.33342, 1.31132, 1.26158, 1.53277;
    1.61595, 1.59385, 1.54411, 1.25024;
    1.33342, 1.31132, 1.26158, 1.53277;
    1.61595, 1.59385, 1.54411, 1.25024;
    1.33342, 1.31132, 1.26158, 1.53277;
    1.61595, 1.59385, 1.54411, 1.25024;
    1.33342, 1.31132, 1.26158, 1.53277;
    1.61595, 1.59385, 0, 1.25024;
    1.33342, 1.31132, 0, 1.53277;
    1.61595, 1.59385, 0, 1.25024;
    1.33342, 1.31132, 0, 1.53277;
    1.61595, 1.59385, 0, 1.25024;
    1.33342, 1.31132, 0, 1.53277;
    1.61595, 0, 0, 1.25024;
    1.33342, 0, 0, 1.53277;
    1.61595, 0, 0, 1.25024;
    1.33342, 0, 0, 1.53277
] m
