# AguaClara Water Treatment Plants
# Automated Design
# Add variable descriptions next to every varible so it is easy to interpret what this all means.
# Design References
# [reference: BasicInputs3Sed1Bay.xmcd]
# Use BasicClientInputs and ExpertClientInputs when this is run by LabVIEW.
# Use BasicInputs and ExpertInputs to use the program in MathCAD
# Change the reference by
# - right clicking
# - select properties
# - reference tab
# - type in the correct file name
# [reference: ExpertInputs.xmcd]
# [reference: DesignAssumptions.xmcd]
# [reference: MathFunctions.xmcd]
# [reference: PipeDatabase.xmcd]
# [reference: MinorLossCoefficients.xmcd]
# [reference: FluidsFunctions.xmcd]
# [reference: Sedimentation Tank.xmcd]
# [reference: Floc Hopper - New Design.xmcd]
# [reference: FCM.xmcd]
# [reference: Flocculator 3.xmcd]
# [reference: RapidMixer.xmcd]
# [reference: EntranceTankDim.xmcd]
# [reference: Materials List.xmcd]
# [reference: Vertical Flocculator baffle port drain design.xmcd]
Q_Plant = 6 L/s
N_SedTanks = 2
W_ExitChannelMin = 0.092 m
W_SedBay = 0.92 m
N_SedBays = 1
# Sed Tanks and Slopes:
Geom_ExitChannel = 0
B_SedPort = 3.91009 cm  # Height of the narrowest part of the manifold ports
N_SedTanks = 2
W_SedPort = 3.91009 cm
H_SedBetween = 0 cm  # Distance from the top of the inlet manifold to the bottom of the ledge supporting the lamella frame
A_SedPort = 15.2888 cm^2  # Port Area
L_Sed = 4.02484 m
W_SedSludgeFlat = 5 cm  # Distance between tips of manifold plates (space alloted for the drain holes
N_SedBays = 1  # Number of bays of inlet manifolds in each sed tank
AN_SedTopInlet = 60 deg  # Angle of the top of the inlet manifold
L_SedPort = 4.51498 cm  # Length of the port through which water exits the inlet manifold
AN_SedBottom = 10 deg  # Angle of the bottom of inlet manifold
W_SedSlopePlate = 30 cm  # Width of ferrous cement plates in whice one manifold port is cut
Q_SedBay = 3 L/s
W_SedBayActual = 0.92 m
L_SedSlopeManifold = 0.800718 m  # This is the extra distance between the last slope and the wall
# Sedimentation Tank Sludge Drain:
N_SedSludgeOrifices = 26  # per cell
Ti_SludgeDrain = 30 min  # Tank Drain time
W_SedSludge = 11.6054 cm  # Width of the sludge channel
B_SedSludgeOrifices = 15 cm  # Distance center to center between drain orifices
H_SedSludge = 5.80269 cm  # Depth of the sludge channel
T_SedSludge = 6 cm
T_SedSludge = 6 cm
# Thickness of the plate topping the sludge channel
# through which drain holes are formed
W_SedDrainCover = 19.2376 cm
D_SedSludgeOrifice = 0.015 m  # Diameter of drain orifices
W_SedInletBottom = 0.363812 m
N_SedSludgeOrifices = 26
ND_SedSludgeValve = 2 in
# Sedimentation Tank Dimensions:
Z_SedSludge = 0.118027 m  # Height from 0 of the top of the sludge drain
H_SedBottomSlope = 0.0638653 m  # Height of the bottom slope
H_SedTopSlope = 0.693442 m  # Height of the top of the inlet manifold
Z_SedSlopes = 0.811469 m  # Height from 0 of the top of the inlet manifold
W_Sed = 0.92 m  # Total tank wall height
L_Sed = 4.02484 m  # Total tank length
# Inlet Channel:
HW_InletChannel = 0.215517 m  # Width of the drop chimneys connecting channel to sed inlet manifolds
W_InletChannel = 0.28352 m  # length of drop chimmneys
L_Channel = 2.29 m
W_SedManifoldEntrance = 0.28352 m
L_SedManifoldEntrance = 0.211412 m
H_SedManifoldPort = 0.180343 m  # Ports at bottom of inlet chimney are set to be triangles
W_SedManifoldPort = 0.298759 m
N_SedInletPipes = 2  # per sed bay
H_InletChannel = 0.315517 m
# Sedimentation Tank Effluent Launder:
N_SedLaunderOrifices = 66  # Number of orifices per launder
Q_SedLaunderOrifices = 2.27273e-5 m^3/s  # More Launder Dimensions
ND_SedLaunder = 3 in
B_SedLaunderOrifices = 0.1 m  # Center to center launder spacing
L_SedLaunder = 3.44685 m
# Exit Channel:
D_SedLaunderOrifice = 0.275591 in
W_ExitChannel = 0.144478 m
H_ExitChannel = 0.315517 m
L_ExitChannel = 2.29 m
H_PltWeir = 0.13907 m  # height of the weir carrying water to the distribution tank
HW_ExitChannel = 0.175517 m  # water height in exit channel from 0
# Lamella:
L_SedPlate = 0.36576 m
B_SedPlate = 1.93075 cm  # center to center distance between lamella
S_SedPlate = 1.7 cm  # spacing between lamella
N_SedPlates = 141  # Number of Sed Plates per Sedimentation Tank Bay.
AN_SedPlate = 60 deg
ZW_ExitChannel = 1.38365 m
V_SedC = 10.4017 m/day
L_SedActive = 2.62553 m
T
V_SedUp = 70 m/day
Z_SedLaunder = 1.3392 m
H_SedPlate = 0.316757 m
H_SedAbove = 0.1289 m  # Height of water needed above the lamella
N_SedPlates = 141
HW_Sed = 1.42365 m
H_Sed = 1.52365 m
Z_Mp = 1.20813 m
N_SedPorts = 11
H_SedBayDivider = 0.881469 m
W_SedSlopePlateRemaining = 0.724845 m
W_SedBayDivider = 0.15 m
# Sedimentation Tank Floc Hopper:
A_FlocHopper =  # error: This variable is undefined.
L_FlocHopper = 0.92 m  # Length of the hopper cement plate
L_FlocHopperOffset = 0.18288 m  # distance from the edge of the channel to the bottom of the first lamella (collection distance)
W_FlocHopper = 0.05 m  # width of the hopper set within each bay
# Flow Controller:
N_Fcm = 1
ID_FcmTube = 3.175 mm
ID_FcmTube = 0.125 in
L_FcmTube = 104.566 cm
Q_FcmTubeMax = 270 mL/min
HL_FcmValve = 13.544 cm
# Flocculator: | Look at Flocculator Positioning arrays
W_FlocChannel = 0.45 m
# Fill last channel with bafffles from last channel
# Fix port width to be based on energy dissipation in that channel
ED_Floc = [20; 2] mW/kg
# Adjust spacing after the number of baffles per channel is known.
# Check the residence time of the flocculator should be at least 20minutes
HW_FlocEnd = 1.42365 m
X_FlocBaffles = [
    0.0954948, 0.11634, 0.163242, 0.352807;
    0.23099, 0.27268, 0.366484, 0.566746;
    0.366484, 0.429021, 0.569727, 0.780685;
    0.501979, 0.585361, 0.772969, 0.994625;
    0.637474, 0.741701, 0.976211, 1.20856;
    0.772969, 0.898041, 1.17945, 1.4225;
    0.908464, 1.05438, 1.3827, 1.63644;
    1.04396, 1.21072, 1.58594, 1.85038;
    1.17945, 1.36706, 1.78918, 2.06432;
    1.31495, 1.5234, 1.99242, 2.27826;
    1.45044, 1.67974, 2.19566, 2.4922;
    1.58594, 1.83608, 2.39891, 2.70614;
    1.72143, 1.99242, 2.60215, 2.92008;
    1.85693, 2.14876, 2.80539, 3.13402;
    1.99242, 2.3051, 3.00863, 3.34796;
    2.12792, 2.46144, 3.21188, 3.56189;
    2.26341, 2.61778, 3.41512, 3.53795;
    2.39891, 2.77412, 3.61836, 3.73823;
    2.5344, 2.93046, 3.8216, 0;
    2.6699, 3.0868, 0, 0;
    2.80539, 3.24314, 0, 0;
    2.94089, 3.39948, 0, 0;
    3.07638, 3.55582, 0, 0;
    3.21188, 3.71216, 0, 0;
    3.34737, 3.8685, 0, 0;
    3.48287, 0, 0, 0;
    3.61836, 0, 0, 0;
    3.75386, 0, 0, 0;
    3.88935, 0, 0, 0
] m
L_FlocBaffles = [
    1.32815, 1.30731, 1.2604, 1.54017;
    1.61862, 1.59777, 1.55087, 1.24971;
    1.32815, 1.30731, 1.2604, 1.54017;
    1.61862, 1.59777, 1.55087, 1.24971;
    1.32815, 1.30731, 1.2604, 1.54017;
    1.61862, 1.59777, 1.55087, 1.24971;
    1.32815, 1.30731, 1.2604, 1.54017;
    1.61862, 1.59777, 1.55087, 1.24971;
    1.32815, 1.30731, 1.2604, 1.54017;
    1.61862, 1.59777, 1.55087, 1.24971;
    1.32815, 1.30731, 1.2604, 1.54017;
    1.61862, 1.59777, 1.55087, 1.24971;
    1.32815, 1.30731, 1.2604, 1.54017;
    1.61862, 1.59777, 1.55087, 1.24971;
    1.32815, 1.30731, 1.2604, 1.54017;
    1.61862, 1.59777, 1.55087, 1.24971;
    1.32815, 1.30731, 1.2604, 1.54017;
    1.61862, 1.59777, 1.55087, 1.24971;
    1.32815, 1.30731, 1.2604, 1.54017;
    1.61862, 1.59777, 0, 1.24971;
    1.32815, 1.30731, 0, 1.54017;
    1.61862, 1.59777, 0, 1.24971;
    1.32815, 1.30731, 0, 1.54017;
    1.61862, 1.59777, 0, 1.24971;
    1.32815, 1.30731, 0, 1.54017;
    1.61862, 0, 0, 1.24971;
    1.32815, 0, 0, 1.54017;
    1.61862, 0, 0, 1.24971;
    1.32815, 0, 0, 1.54017
] m
Z_FlocBaffles = [
    0, 0, 0, 0.173939;
    0.0954948, 0.11634, 0.163242, 0;
    0, 0, 0, 0.173939;
    0.0954948, 0.11634, 0.163242, 0;
    0, 0, 0, 0.173939;
    0.0954948, 0.11634, 0.163242, 0;
    0, 0, 0, 0.173939;
    0.0954948, 0.11634, 0.163242, 0;
    0, 0, 0, 0.173939;
    0.0954948, 0.11634, 0.163242, 0;
    0, 0, 0, 0.173939;
    0.0954948, 0.11634, 0.163242, 0;
    0, 0, 0, 0.173939;
    0.0954948, 0.11634, 0.163242, 0;
    0, 0, 0, 0.173939;
    0.0954948, 0.11634, 0.163242, 0;
    0, 0, 0, 0.173939;
    0.0954948, 0.11634, 0.163242, 0;
    0, 0, 0, 0.173939;
    0.0954948, 0.11634, 0, 0;
    0, 0, 0, 0.173939;
    0.0954948, 0.11634, 0, 0;
    0, 0, 0, 0.173939;
    0.0954948, 0.11634, 0, 0;
    0, 0, 0, 0.173939;
    0.0954948, 0, 0, 0;
    0, 0, 0, 0.173939;
    0.0954948, 0, 0, 0;
    0, 0, 0, 0.173939
] m
N_FlocChannels = 4
L_FlocTank = 16.0994 m
HL_Floc = 19.0467 cm
HW_FlocStart = 1.61411 m
S_FlocBaffle = [9.54948; 11.634; 16.3242; 17.3939] cm
B_FlocBaffle = [13.5495; 15.634; 20.3242; 21.3939] cm
N_FlocChannelBaffles = [29; 25; 19; 18]
W_FlocPort = [0.0454948; 0.0663402; 0.113242; 0.123939] m
HL_FlocChannels = [9.59668; 5.51996; 2.138; 1.79201] cm
L_FlocBaffleLower = [1.32815; 1.30731; 1.2604; 1.24971] m
L_FlocBaffleUpper = [1.61862; 1.59777; 1.55087; 1.54017] m
H_FlocPort = [0.944562; 0.789161; 0.648689; 0.631541] m
Ti_Floc = 28.6498 min  # residence time of the flocculator
N_FlocBaffles = 91
# Rapid Mix Unit and Entrance Tank:
L_Et = 0.860565 m
W_Et = 0.860565 m
H_Et = 2.01411 m  # Height of Entrance Tank Orifice
W_EtOrifice[30] = 0.031 m
L_trueET[30] = 0.155117 m  # Length of Entrance Tank Orifice
Pi_EtFlow[30] = 0.278388  # Ratio of the minimum flow divided by the maximum flow through the plant.
L_FlocEntryOrifice = 45 cm  # Length of orifice entering into flocculator from Rapid Mix Unit
W_FlocEntryOrifice = 1.8634 cm  # Height of orifice entering into flocculator
ED_Diffusion =  # error  # Minimum Energy Dissipation needed
HL_FlocEntryOrifice = 3.89578 cm  # Head loss caused by entering flocculation tank.
A_FlocEntry = 0.00838528 m^2
A_EtOrifice = 48.0862 cm^2
HW_EtTotal =  # error  # Total Height of water at beginning of rapid mix unit
HW_Channel2 =  # error  # Height of water at the back of the entrance tank channel (from channel bottom)
HW_EtChannel = 4.79941 cm  # Height of Waterfall into flocculator
W_EtChannel = 9.54948 cm  # Widt of entrance tank channel
Vol_Stock = 486 L  # Volume of chemical stock tanks
ZW_ExitChannel = 1.38365 m  # Water Level at the end of the plant in the exit channel and exit channel box
HW_Sed = 1.42365 m
HW_FlocStart = 1.61411 m  # Water level at the beginning of the floc tank
HL_Floc = 19.0467 cm  # just for ref. the head loss throught the floc tank
HW_EtTotal =  # error  # Height of the water in the entrance channel
# Materials List:
L_LaunderPipe =  # error
N_Launders = 4
L_LaunderPipeTotal = 13.7874 m
N_Valves = 2
N_LaunderCouplings = 4
N_ValveCouplings = 2
N_SedPlatesTotal = 282
N_SedPlatesPerSheet = 10
N_SedPlateSheets = 29
N_PipeSedPlateStand =  # error
A_SedTank =  # error
# [reference: AutoCADMasterProgram.xmcd]
# AutoCAD References
AC_SedTank = [
    "_-view o t"; "-layer m tank"; "c t 132,132,132"; "tank"; "  "; "_-view o t _zoom w 0.16,-0.16,0 -4.40907,1.08,1.53695 _box 0,0,0 -4.24907,0.92,1.53695 _box 0.15,-0.15,-0.15 -4.39907,1.07,1.53695 _subtract 0.15,-0.15,-0.15  0,0,0 "; "-layer s 0"; "  "; "-layer f tank"; "  "
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]
AC_EntranceTank = [
    "-layer m entrancetank";
    "c t 214,214,214";
    "entrancetank";
    "  ";
    "_-view o t _zoom w 0.16,4.38,0 -1.04421,5.58421,2.02011 _box 0,4.54,0 -0.88421,5.42421,2.02011 _box 0.15,4.39,-0.15 -1.03421,5.57421,2.02011 _subtract 0.15,4.39,-0.15  0,4.54,0 ";
    "-layer s 0";
    "  ";
    "-layer f entrancetank";
    "  ";
    "-layer s entrancetank";
    "  ";
    "_box -0.88421,4.39,1.97011 -0.78124,4.54,2.02011";
    "-layer s 0";
    "  ";
    "-layer t entrancetank";
    "  ";
    "_-view o t";
    "_subtract 0.15,4.54,0  -0.88421,4.39,1.97011 ";
    "-layer f entrancetank";
    "  "
]
AC_FlocTank = [
    "-layer m floctank";
    "c t 91,91,91";
    "floctank";
    "  ";
    "_-view o t _zoom w 0.16,1.98,0 -4.40907,4.55,1.72011 _box 0,2.14,0 -4.24907,4.39,1.72011 _box 0.15,1.99,-0.15 -4.39907,4.54,1.72011 _subtract 0.15,1.99,-0.15  0,2.14,0 ";
    "_box -4.39907,2.59,0 0.15,2.74,1.72011";
    "_box -0.12445,2.59,0.87478 0,2.74,0";
    "_subtract -4.39907,2.59,0  -0.12445,2.59,0.87478 ";
    "_box -4.39907,3.19,0 0.15,3.34,1.72011";
    "_box -4.24907,3.19,0.75014 -4.1741,3.34,0"
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]
