# [reference: MasterProgram.xmcd]
# This is a program to calculate how much time is required to drain out a flocculator section. Each section of the flocculator is connected to one another with alternating holes on the bottom of the baffles. These holes are small enough not to disrupt flow over the baffles and big enough such that one drain will empty out all the sections.
# Initially, the tank is full. This is denoted at time=t(0).
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# Once the tanks start draining, at time=t(1) all the water is level.
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# At time=t(2), section 1 has begun to drain quicker than sections 2, 3 & 4.
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# Each hole on the bottom of the baffles is treated as an orifice.
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A_toptank(b, w) := b*w
h(V, A) := V/A
Q_minor(K_minor, D, h1, h2) :=
    Q ← (π*D^2/4*sqrt(2*g*(h1 - h2)/K_minor)) if h1 - h2 > 0
    Q ← 0*m^3/s otherwise
V_vol(b, w, h) := w*b*h
V_tankOUT(Q, t) := Q*t
h_master(base, width, D_Port, K_Port, h_initial, n_tanks) :=
    Δt ← base*width*h_initial/(Q_minor(K_Port, D_Port, h_initial, 0 m)*100)
    time ← -Δt
    for i ∈ 0 .. n_tanks
        h_tank[i, 0] ← h_initial
        h_tank[0, 0] ← 0 m
    j ← -1
    while h_tank[n_tanks, j + 1] > 1 mm
        time ← time + Δt
        j ← j + 1
        for i ∈ 0 .. n_tanks
            Q[i, j] ← Q_minor(K_Port, D_Port, h_tank[i + 1, j], h_tank[i, j]) if i < n_tanks
            Q[i, j] ← 0*m^3/s otherwise
            h_tank[i, j + 1] ← h_tank[i, j] + (Q[i, j] - Q[i - 1, j])*Δt/(base*width) if i > 0
            h_tank[i, j + 1] ← 0 m otherwise
    return h_tank  # Base and width are defined as the base and width of a single channel
# We need to calculate 'n' different h values plus an extra 'h'
# which would be the value emptied from tank 1. The tanks are
# numbered from 1 to n
# There will only be n-1 different flows out from each tank
t_master(base, width, D_Port, K_Port, D_Valve, K_Valve, h_initial, H_LowerBaffle, n_tanks) :=
    time ← (sqrt(h_initial) - sqrt(H_LowerBaffle))/((π*D_Valve^2/(8*n_tanks*base*width))*sqrt(2*g/K_Valve))
    Δt ← base*width*H_LowerBaffle/(Q_minor(K_Port, D_Port, H_LowerBaffle, 0 m)*100)
    for i ∈ 0 .. n_tanks
        h_tank[i, 0] ← H_LowerBaffle
        d[i] ← D_Port
        K[i] ← K_Port
    h_tank[0, 0] ← 0 m
    d[0] ← D_Valve
    K_0 ← K_Valve
    j ← -1
    while h_tank[n_tanks, 0] > 1 mm
        time ← time + Δt
        j ← 0
        for i ∈ 0 .. n_tanks
            Q[i, j] ← Q_minor(K[i], d[i], h_tank[i + 1, j], h_tank[i, j]) if i < n_tanks
            Q[i, j] ← 0*m^3/s otherwise
            h_tank[i, j] ← h_tank[i, j] + (Q[i, j] - Q[i - 1, j])*Δt/(base*width) if i > 0
            h_tank[i, j] ← 0 m otherwise
    return time  # The factor of 100 gives a fast solution and an error that is less that 0.1%.
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t_mastermod(base, width, D_Port, K_Port, D_Valve, K_Valve, H_LowerBaffle, n_tanks) :=
    time ← 0 s
    Δt ← base*width*H_LowerBaffle/(Q_minor(K_Port, D_Port, H_LowerBaffle, 0 m)*100)
    for i ∈ 0 .. n_tanks
        h_tank[i, 0] ← H_LowerBaffle
        d[i] ← D_Port
        K[i] ← K_Port
    h_tank[0, 0] ← 0 m
    d[0] ← D_Valve
    K_0 ← K_Valve
    j ← -1
    while h_tank[n_tanks, 0] > 1 mm
        time ← time + Δt
        j ← 0
        for i ∈ 0 .. n_tanks
            Q[i, j] ← Q_minor(K[i], d[i], h_tank[i + 1, j], h_tank[i, j]) if i < n_tanks
            Q[i, j] ← 0*m^3/s otherwise
            h_tank[i, j] ← h_tank[i, j] + (Q[i, j] - Q[i - 1, j])*Δt/(base*width) if i > 0
            h_tank[i, j] ← 0 m otherwise
    return time
D_check(H_LowerBaffle, h, K_minor, S_FlocBaffle, W_FlocChannel, t) :=
    tdsquared ← 4*(H_LowerBaffle^.5 - sqrt(h))/(π*(2*g/K_minor)/(2*S_FlocBaffle*W_FlocChannel))
    D_guess ← sqrt(4*sqrt(H_LowerBaffle)/(π*(2*g/K_minor)*t/(2*S_FlocBaffle*W_FlocChannel)))
    error ← 1
    while error > 0.001
        t_test ← tdsquared/D_guess^2
        error ← |t_test - t|/t
        D_guess ← tdsquared^0.5/t_test if error > 0.001
    return D_guess
# Solves tdsquared for D as an initial guess
base := 2*46*cm
width := 0.72 m
K_orifice := 0.63
K_Port := 1/K_orifice^2 = 2.51953
K_Valve := 7
Δt := 0.25 s
h_initial := 2 m
H_LowerBaffle := 1.7 m
0.02*9 m/(1.5 in) = 4.72441
n_tanks := 10
D_Port := 6 in
L_Sed := base*n_tanks = 9.2 m
W_FlocChannel := width
Ti_Drain := 20 min
# Solution path to get port area and valve diameter
# FInd area of ports assuming all including valve are same area.
# Try solution with valve one size smaller
# find required port area
# If that doesn't work, then increase valve size
# find required port area
# These equations are from integration of the flow out of a tank with changing depth
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D_ValveGuess(HW_Floc, W_FlocChannel, L_Sed, Ti_Drain, K_Valve) := sqrt(8*W_FlocChannel*L_Sed/(π*Ti_Drain))*(HW_Floc*K_Valve/(2*g))^(1/4)
D_ValveGuess(h_initial, W_FlocChannel, 2 m, Ti_Drain, K_Valve) = 2.00042 in
# Need to round up to the next available pipe size
D_Valve := 4 in  # FIx this to get size from pipe database
# This valve size is a lower limit since it doesn't include the effect of the multiple tanks in series
t := D_Valve = 0.1016 m
t_master(base, width, D_Port, K_Port, D_Port, K_Valve, h_initial, H_LowerBaffle, n_tanks) = 10.9855 min
t_master(base, width, D_Port, K_Port, D_Valve, K_Valve, h_initial, H_LowerBaffle, n_tanks) = 16.6554 min
t_Port(D_Valve, D_Port) := t_master(base, width, D_Port, K_Port, D_Valve, K_Valve, h_initial, H_LowerBaffle, n_tanks)
D_Valve := 2 in, 3 in .. 8 in
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t_Port(4 in, 6 in) = 16.6554 min
h_tanks := h_master(base, width, D_Port, K_Port, h_initial, n_tanks)
i := 0 .. cols(h_tanks)
time[i] := Δt*i
time[cols(h_tanks)] = 15.0333 min
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D_Valve = [0.0508; 0.0762; 0.1016; 0.127; 0.1524; 0.1778; 0.2032] m
D_Valvem := [0.0508; 0.0762; 0.1016; 0.127; 0.1524; 0.1778; 0.2032]*m
n_tank := 1 .. 10
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# Revelation: If the valve is the flow limiter, the relationship is linear;
# if the ports are limiting, the relationship is quadratic(maybe)
t_mm(base, width, D_Port, K_Port, K_Valve, H_LowerBaffle) :=
    for i ∈ 0 .. 10
        for j ∈ 0 .. 6
            t[j, i] ← t_mastermod(base, width, D_Port, K_Port, D_Valvem[j], K_Valve, H_LowerBaffle, i)
    t[j, i]  # error: Evaluation not allowed in this definition.  # Can be deleted?
i := 0 .. 6
n_tanks = 10
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# The stark difference in slope comes from the valve being rate limiting if there is only 1 channel
# versus the port(s) being the flow limiter
#
# Log scale because the time scale is vastly different between the first and last port sizes
# Returns a port size based on allowable valve sizes
T_wanted := 88 min
PortSize(base, width, H_LowBaffle, n_channels, desiredT, h_o) :=
    tankDrainTime ← 100 hr
    i ← 0
    D_port ← -1 m
    D_port ← D_Valvem[last(D_Valvem)] if T_wanted ≤ t_master(base, width, D_Valvem[last(D_Valvem)], K_Valve, D_Valvem[last(D_Valvem)], K_Valve, h_o, H_LowBaffle, (N_FlocBaffles + 1)/2)
    while i < rows(D_Valvem) and D_port == -1 m
        tankDrainTime ← t_master(base, width, D_Valvem[i], K_Valve, D_Valvem[i], K_Valve, h_o, H_LowBaffle, n_channels)
        if tankDrainTime < 1.1*desiredT
            D_port ← D_Valvem[i]
            i ← rows(D_Valvem)
        i ← i + 1 otherwise
        D_port
    D_port
# Think about the size of the first and last channels being only half the size
# Make this smarter so that if the time difference is < some %, use smaller
# ports to save on material costs (see if statement)
t_master(base, width, D_Valvem[last(D_Valvem)], K_Valve, D_Valvem[last(D_Valvem)], K_Valve, (HW_FlocEnd + HW_FlocStart)/2, H_LowerBaffle, (N_FlocBaffles + 1)/2) = 87.8936 min
rows(D_Valvem) = 7
t_master(base, width, D_Valvem[6], K_Valve, D_Valvem[6], K_Valve, (HW_FlocEnd + HW_FlocStart)/2, H_LowerBaffle, (N_FlocBaffles + 1)/2) = 87.8936 min
# determine the difference in drain time for successive valve sizes
# iterate from 0 - 5 because there are 7 possible valve sizes, therefore only 6 possible differences
D_port := PortSize(L_FlocTank, W_FlocChannel, H_LowerBaffle, (N_FlocBaffles + 1)/2, T_wanted, (HW_FlocEnd + HW_FlocStart)/2) = 0.2032 m
t_diff(base, width, D_Port, K_Port, D_Valve, K_Valve, h_initial, H_LowerBaffle, num_tanks) :=
    for i ∈ D_Valve
        t_diff ← t_mastermod(base, width, D_Port, K_Port, D_Valve[i], K_Valve, H_LowerBaffle, num_tanks)[i + 1] - t_mastermod(base, width, D_Port, K_Port, D_Valve, K_Valve, H_LowerBaffle, num_tanks)[i]
    t_diff
num_tank := 1 .. 5
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Max := time[cols(h_tanks)]/(0.1 min)
Currenttime := FRAME*0.1*min
j := 0 .. n_tanks
i := round(Currenttime/Δt)
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Currenttime =  # no stored result
i := 1 .. 4000
ρ := 1000*kg/m^3
w := 1 m
Baffleforce[i] := (h_tanks[2, i] - h_tanks[1, i])*ρ*g*w*h_tanks[1, i]
# missing force due to pressure above water surface on lower side of baffle
t_diff(base, width, D_Port, K_Port, D_Valve, K_Valve, h_initial, H_LowerBaffle, 1) =  # no stored result
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max(Baffleforce) =  # no stored result
Baffleforce[i] =  # no stored result
