# [reference: FluidsFunctions.xmcd]
# Test Assumptions
# [reference: PipeDatabase.xmcd]
Q_plant := 10*L/s
h_lossmax := 50 cm
i := 0 .. 100
PipeSpecification := 4
ν := 1*10^-6*m^2/s
vector := [0.013; 0.023; 0.037; 0.048; 0.071; 0.092; 0.14; 0.183; 0.273; 0.345; 0.432; 0.518]
L_pipe := 2 m
K_total := 0.8
# This function is imported from FluidsFunctions to calculate pipe size based on flow rate.
PipeSize(Q_plant, PipeSpecification, L_pipe, K_total, h_lossmax, ν, ε_pvc) :=
    Pipe_size ← D_pipe(Q_plant, vector*m, h_lossmax, L_pipe, ν, ε_pvc, K_total)
    return Pipe_size
# This is the inner diameter of the pipe
d_pipe := D_pipe(Q_plant, vector*m, h_lossmax, L_pipe, ν, 0, K_total) = 2.79528 in
# Sizing the Macromixing Orifice
# We want a minor loss coefficient of 1.3
K_e := 1.3
K_vc := 0.62
# So we use the equation for minor loss coefficient for a submerged orifice given in the notes on Flow Control and Measurement to determine d.or
d_macromixorifice := d_pipe*(1/(K_vc*(K_e^0.5 + 1)))^0.5
d_macromixorifice = 2.42663 in
# We are assuming a circular orifice here.  The resulting area of the orifice and velocity through the orifice are given below.
A_macromixorifice := π*d_macromixorifice^2/4 = 0.00298377 m^2
A_out := π*d_pipe^2/4
V_macromixorifice := Q_plant/A_macromixorifice = 3.35146 m/s
V_out := Q_plant/A_out = 2.52577 m/s
# The resulting head loss through the orifice is given as:
h_emacromixorifice := K_e*V_out^2/(2*g)
# Sizing the Micromixing Orifice
# There are two conditions that must be met here.  First of all the energy disspation rate must be 1 W/kg and there must be a head loss of 20 to 50 cm.
ε := 1*W/kg
h_total := 50 cm
h_emicromixorifice := h_total - h_emacromixorifice = 7.71566 cm
A_micromixorifice := (A_out/K_vc)/(((2*g*h_emicromixorifice)/(V_out^2))^0.5 + 1) = 0.00429429 m^2
d_micromixorifice := (4*A_micromixorifice)^0.5/π^0.5 = 2.91116 in
# The largest smallest dimension is calculated below.
W := (2*g*h_emicromixorifice)^(3/2)/(20*ε) = 3.66456 in
# There is more coding needed.  We have the largest smallest dimension and the area needed.  We have to determine whether to use squares, rectangles, circles, and if more than one is needed.
