# note these are the inputs for Ecuador
# Engineer Entered Values:
Q_Plant := 100.4*gal/min
acad_version := 2008
# General Plant Parameters
H_PlantFreeboard := 10 cm  # Height of the tank walls greater than the water level
# sed tank parameters
W_SedBay := 92 cm  # width of lamella = width of sed tank bay
W_SedSlopePlate := 30 cm
T_SedSlopePlate := 4 cm
Ti_SludgeDrain := 30 min  # The drainage time for the sedimentation tank
EN_PipeSpec := 4
EN_DrillSeries := 1
N_SedTanks := 2
# Number of sedimentation tanks (to ensure currently reasonable dimensions, this might be a factor by which to enlarge the number of sedimentation tanks in the future.)
N_SedBaysEst := 1  # Number of bays (slope pairs) in each sedimentation tank
W_SedFrameWall := 4 cm
H_SedFrameWall := 7 cm
T_SedManifoldEntrance := 2 in  # Thickness of the concrete walls making up the drop tubes that carry water from the inlet channel to the sed tank manifold.
B_SedPipe := 30 cm  # Distance between pipes in the sed tank for the lamella frame.
T_SedPlate := 3 mm  # Thickness of Plate Settlers
T_SedInletSlope := 4 cm  # Thickness of the top portion of the sed inlet
L_SedPlateSheet := 12 ft  # Length of one lamella sheet
ND_SedPlateFrame := 1.5 in  # Nominal Diameter of the pipe used for sed plate frame.
# floc parameteres
T_FlocBaffle := 4 cm
S_FlocChannel := 5 cm
# length of the slot into which the baffles are slipped
L_slot := 5 cm
# Chem Feed Parameters
C_FcmDoseMax := 90*mg/L
C_FcmAlum := 120*gm/L
EN_FcmTube := 0
Ti_StockMin := 30 hr
# Values used to Draw Plant:
T_PlantWall := 15 cm
W_MpWalkway := 1 m
Q_Plant := 50*l/s
N_SedTanks := 3
T_PlantWall := 15 cm
C_AlumDoseMax := 80*mg/L
N_SedBaysEst := 1
T_FlocBaffle := 4 cm
C_AlumStock := 250*gm/l
W_SedBay := 100 cm
S_FlocChannel := 2 cm
Ti_AlumStock := 30 hr
L_SedPlateSheet := 300 cm
H_PlantFreeboard := 10 cm
EN_DrillSeries := 1
T_SedPlate := .3 cm
W_SedManifoldPlate := 30 cm
ND_SedPlateFrame := 2 in
T_SedManifoldPlate := 4 cm
Ti_SludgeDrain := 40 min
T_SedManifoldEntrance := 4 cm
EN_PipeSpec := 4
