Q_Plant := 50*l/s
V_EtUp := 12*mm/s
N_SedTanks := 3
ED_SedInlet := 2*mW/kg
T_PlantWall := 15 cm
V_SedCBod := .8*mm/s
C_AlumDoseMax := 80*mg/L
ED_Rm := 1*mW/kg
N_SedBaysEst := 1
T_FlocBaffle := 4 cm
AN_SedManifoldBottom := 5 °
C_AlumStock := 250*g/l
V_SedCBod := .12*mm/s
W_SedBay := 100 cm
W_FlocChannelMin := 45 cm
S_FlocChannel := 2 cm
Ti_AlumStock := 30h
AN_SedManifoldTop := 60 °
L_SedPlateSheet := 300 cm
Pi_FlocBaffle := 1
H_PlantFreeboard := 10 cm
Pi_FlowManifold := .8
EN_DrillSeries := English  # error: This variable is undefined.
S_SedPlateMin := 2 cm
T_SedPlate := .3 cm
W_SedManifoldPlate := 30 cm
CP_Floc := 110 m^(2/3)
EN_TubeSeries := English  # error: This variable is undefined.
W_SedSludgeFlat := 5 cm
ND_SedPlateFrame := 2 in
N_SedLaunders := 2
T_SedManifoldPlate := 4 cm
W_SedSludgeOverlap := 5 cm
EN_PipeSeries := SDR26  # error: This variable is undefined.
Ti_SludgeDrain := 40 min
Pi_FlowLaunder := .8
T_SedManifoldEntrance := 4 cm
Pi_FlowSludge := .8
HL_SedLaunderBod := 5 cm
B_SedLaunderOrifices := 10 cm
ED_Floc := [20; 2]*mW/kg
