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# [reference: BasicInputs3Sed1Bay.xmcd]
# [reference: ExpertInputs.xmcd]
# [reference: DesignAssumptions.xmcd]
# [reference: MathFunctions.xmcd]
# [reference: PipeDatabase.xmcd]
# [reference: MinorLossCoefficients.xmcd]
# [reference: FluidsFunctions.xmcd]
# [reference: Sedimentation Tank.xmcd]
# [reference: Floc Hopper - New Design.xmcd]
# [reference: FCM.xmcd]
# Get rid of references before putting in real Final Designs folder. I was just using them to make sure everything worked.
Pi_HbMin := 3  # Should go into Basis of Design. Doesn't really need to be accesible even to experts. Ratio of water depth to spacing between baffles.
# The new flocculation model more carefully distinguishes between maximum and average energydissipation rates. The flocculators should be designed based on a maximum allowed energy dissipation rate to ensure that suboptimal geometry (high h/b ratios) doesn't result in excessively high energy dissipation rates that could break flocs. However, since this model is now incorporating the concept of a maximum energy dissipation rate the energy dissipation rate guidelines need to be increased to account for the distinction between average and maximum.
# Because we are now using the concept of a maximum energy dissipation rate it should be possible to directly incorporate results from laminar flow flocculators to produce guidelines on the maximum allowable energy dissipation rates. One caveat is that the turbulent flow energy dissipation rates are time averaged and it is not yet clear what the expected temporal variability is for turbulent flow energy dissipation rates.
# CFD results and functions
# all design values from Yi, Wenqi, 2009
# The fraction of the maximum collision potential that could be achieved if the energy dissipation rate was uniformly distributed. Or, if this fraction of the available energy were uniformly distributed the collision potential would be the same as what it is given the nonuniformity in the energy dissipation rate distribution.
# ratio of water depth to baffle spacing
# 3.
# Note that this data (ψ.Pdat) can not be used directly in design because it has units! It only applies to the case for b=0.1m (the case used in the CFD FLUENT analysis).
# 1. | 2.
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ψ_Pdat := [0.49962; 0.65143; 0.67122; 0.71292; 0.89548; 1.00041; 1.24420; 1.45759; 2.15668]*m^(2/3)
Pi_HBdat := [2; 3; 4; 5; 8; 10; 15; 20; 40]  # h/b*values
α_ψdat := [0.65; 0.86; 0.87; 0.85; 0.71; 0.64; 0.53; 0.46; 0.33]
# The maximum energy dissipation rate is loosely defined as the the maximum energy dissipation rate that is seen by a significant fraction of the flow. We don't have a good way to characterize this parameter analytically yet, but I estimated this using the color contours of the energy dissipation rate (data from Yi, Wenqi, 2009). Note the very large values of this ratio for high h/b ratios. High h/b ratios have very nonuniform energy dissipation rates.
# Minor loss coefficient. This many equivalents of the kinetic energy are lost through one baffle. Note that the minor loss coefficient is very large for small h/b values
# 4.
# 5.
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K_Pdat := [9.60; 7.17; 4.32; 3.42; 3.15; 3.13; 3.22; 3.39; 3.84]
α_εdat := [1.875617391; 1.808368729; 1.776938668; 1.927164849; 3.356408643; 4.221784408; 6.332676611; 7.793864103; 13.75322341]
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# 6.
α_ψ(Pi_HB) := linterp(Pi_HBdat, α_ψdat, Pi_HB)  # These functions use linear interpolation to create functional relationships as a function of the h/b ratios
α_ε(Pi_HB) := linterp(Pi_HBdat, α_εdat, Pi_HB)
K_P(Pi_HB) := linterp(Pi_HBdat, K_Pdat, Pi_HB)
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b := 0.1*m
## Flocculator Functions
# 7.
# The Floor function forces the number of baffle spaces to be an  integer and rounds down.
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N_FlocSpacesF(L, T, S) := Floor((L + T)/(S + T), 1)
SofN_FlocBaffleF(L, T, N_Spaces) := (L + T)/N_Spaces - T  # receives the inner length (on the inside of the walls) as the length input
# 8.
# The function below can also be used directly to solve for W by substituting S for W
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S_FlocBaffleIterative(Q, W, H, S, ED) := (K_P(H/S)*α_ε(H/S)/(2*H*ED))^(1/3)*Q/W  # recursive function
# Monroe put this in to make step 15 more clear.
W_FlocBaffle(Q, H, S, ED) := (K_P(H/S)*α_ε(H/S)/(2*H*ED))^(1/3)*Q/S
S_FlocBaffleF(Q, W, H, ED) :=
    S ← S_FlocBaffleIterative(Q, W, H, H/4, ED)
    error ← 1
    while error > 0.001
        S_new ← S_FlocBaffleIterative(Q, W, H, S, ED)
        error ← |S - S_new|/(S + S_new)
        S ← S_new
    return S
# This function returns a spacing that gives the target energy dissipation rate.
# 9.
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# Collision potential per baffle (p for pantalla)
ψ_P(H, S) := (H^2*α_ψ(H/S)*K_P(H/S)/2)^(1/3)
# 10.
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ED(Q, H, S, W) := α_ε(H/S)*K_P(H/S)/(2*H)*(Q/(W*S))^3
# 11.
ED_Target(ψ) :=
    Pi ← [0.4; 0.7]
    m ← (ED_Floc[0] - ED_Floc[1])/((Pi[0] - Pi[1])*CP_Floc)
    b ← ED_Floc[0] - m*Pi[0]*CP_Floc
    ED_Target ← ED_Floc[0] if ψ ≤ Pi[0]*CP_Floc
    ED_Target ← m*ψ + b if ψ > Pi[0]*CP_Floc and ψ ≤ Pi[1]*CP_Floc
    ED_Target ← ED_Floc[1] if ψ > Pi[1]*CP_Floc
    return ED_Target
# This function gives a reasonable relationship between maximum energy dissipation rate and collision potential through a flocculator. This function is a placeholder until we get better information from our research teams.
#
# We can tweak these Pi terms to get the baffle distribution that we like and the head loss that we like
# The Pi terms determine at what fraction of the total collision potential does the energy dissipation rate start to drop and at what energy dissipation rate does it level off again.
# 12.
# The following function cycles through each flocculator channel and checks the possible range of the number of baffles in a channel to see which number of baffles results in the correct energy dissipation rate and cumulative collision potential at the end of the channel.
N_FlocChannelSpacesF(ED_ChannelRange, ψ_ChannelRange, N_FlocSpacesMax, N_FlocSpacesMin) :=
    ψ_Cumulative ← 0
    Channel ← 0
    while ψ_Cumulative < CP_Floc
        i ← 0
        while ED_ChannelRange[i] ≤ ED_Target(ψ_ChannelRange[i] + ψ_Cumulative) and i < (N_FlocSpacesMax - N_FlocSpacesMin)
            i ← i + 1
        N_FlocChannelSpaces[Channel] ← Floor(i + N_FlocSpacesMin, 2)
        ψ_Cumulative ← ψ_Cumulative + ψ_ChannelRange[i]
        Channel ← Channel + 1
    N_FlocChannelSpaces[last(N_FlocChannelSpaces)] ← N_FlocChannelSpaces[last(N_FlocChannelSpaces)] - 1
    return N_FlocChannelSpaces
# search for number of spaces that yields dissipation rate under target
# Floor the number of spaces to get an even number
# Set i to the correct value given the actual number of spaces used
# Calculate actual collision potential
# The number of spaces in the last channel needs to be an odd
# number so that the water flows up to the exit port to
# the sed tank.
## Calculation of Flocculator Geometry
# 13.
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HW_FlocEnd := HW_Sed = 1.43695 m
# 14.
S_FlocBaffleMax := SofN_FlocBaffleF(L_Sed, T_FlocBaffle, N_FlocSpacesF(L_Sed, T_FlocBaffle, HW_FlocEnd/Pi_HbMin)) = 0.496133 m
# 15.
W_FlocChannel := max(W_FlocBaffle(Q_Plant, HW_FlocEnd, S_FlocBaffleMax, ED_Floc[last(ED_Floc)]), W_FlocChannelMin) = 45 cm
# 16.
# If the actual baffles spacing is less than 45 cm, we need to tell the client to use plastic baffles which can be removed so that a human can fit in the flocculator if needed.
S_FlocBaffleMin := S_FlocBaffleF(Q_Plant, W_FlocChannel, HW_FlocEnd, ED_Floc[0]) = 9.86311 cm
N_FlocSpacesMin := N_FlocSpacesF(L_Sed, T_FlocBaffle, HW_FlocEnd/Pi_HbMin) - 1 = 7
# subtract one to handle the case when we reduce the number of spaces through rounding down to an odd or even integer.
N_FlocSpacesMax := N_FlocSpacesF(L_Sed, T_FlocBaffle, S_FlocBaffleMin) = 30
# 17.
# Now calculate the maximum energy dissipation rate given the range of possible baffle spacings and the total collision potential for a channel full of baffles of that spacing.
i := 0 .. N_FlocSpacesMax - N_FlocSpacesMin
# Now calculate the collision potential for an entire channel for each of the possible number of baffles and the corresponding energy dissipation rate
ψ_ChannelRange[i] := ψ_P(HW_FlocEnd, SofN_FlocBaffleF(L_Sed, T_FlocBaffle, i + N_FlocSpacesMin))*(i + N_FlocSpacesMin)
ED_ChannelRange[i] := ED(Q_Plant, HW_FlocEnd, SofN_FlocBaffleF(L_Sed, T_FlocBaffle, i + N_FlocSpacesMin), W_FlocChannel)
ED_ChannelRange = [0.0795534; 0.107068; 0.133031; 0.152965; 0.17155; 0.216595; 0.26457; 0.367628; 0.508035; 0.688153; 0.916021; 1.2008; 1.55288; 1.99004; 2.53346; 3.19719; 4.00301; 4.98783; 6.18339; 7.6216; 9.34521; 11.4038; 13.8548; 16.765] mW/kg
# 18.
ψ_ChannelRange = [13.0873; 14.8708; 16.0273; 16.6851; 17.1425; 18.0663; 18.83; 19.9776; 21.1391; 22.2563; 23.3272; 24.3494; 25.3203; 26.3246; 27.3886; 28.418; 29.4108; 30.4722; 31.5671; 32.64; 33.6894; 34.7135; 35.7107; 36.6788] m^(2/3)
# Calculate the number of spaces in each channel
Q_Plant = 0.00633426 m^3/s
N_FlocSpacesMax = 30
CP_Floc = 110 m^(2/3)
N_FlocSpacesMin = 7
L_Sed = 4.24907 m
N_FlocChannelSpaces := N_FlocChannelSpacesF(ED_ChannelRange, ψ_ChannelRange, N_FlocSpacesMax, N_FlocSpacesMin) = [30; 26; 20; 19]
N_FlocChannels := length(N_FlocChannelSpaces)
Channels := 0 .. N_FlocChannels - 1  # range variable for the floc channels
N_FlocChannelBaffles := N_FlocChannelSpaces - 1
N_FlocBaffles := sum(N_FlocChannelBaffles) = 91  # Total number of baffles in the flocculator
# Now we need to calculate the following for each channel
# baffle center to center distance
# baffle separation distance
# head loss in each channel
# 19.
# Calculate the baffle spacing given the number of baffles in each channel
# so we have different spacing per channel still?
S_FlocBaffle := SofN_FlocBaffleF(L_Sed, T_FlocBaffle, N_FlocChannelSpaces) = [0.102969; 0.124964; 0.174453; 0.18574] m
# Verify that the channels are all the correct length...
vectorize(N_FlocChannelSpaces*S_FlocBaffle) + (N_FlocChannelSpaces - 1)*T_FlocBaffle = [4.24907; 4.24907; 4.24907; 4.24907] m
# 20.
ED_FlocChannel[Channels] := ED(Q_Plant, HW_FlocEnd, S_FlocBaffle[Channels], W_FlocChannel)
ED_FlocChannel = [16.765; 7.6216; 1.99004; 1.55288] mW/kg  # This is the actual energy dissipation rate in each channel
# Calculate the collision potential for each channel
CP_FlocChannel[Channels] := ψ_P(HW_FlocEnd, S_FlocBaffle[Channels])*N_FlocChannelSpaces[Channels]
CP_FlocTotal := sum(CP_FlocChannel) = 120.964 m^(2/3)
B_FlocBaffle := S_FlocBaffle + T_FlocBaffle  # center to center distance
# 21.
HL_FlocBaffle := K_P(HW_FlocEnd/S_FlocBaffle)*Q_Plant^2/(2*g*(S_FlocBaffle*W_FlocChannel)^2) = [0.00305011; 0.00204229; 0.00104482; 0.000929336] m
# head loss per baffle in each channel
HL_FlocChannels := vectorize(HL_FlocBaffle*(N_FlocChannelBaffles + 1)) = [0.0915033; 0.0530995; 0.0208964; 0.0176574] m  # total head loss per channel
HL_Floc := HL_FlocBaffle*N_FlocChannelSpaces = 18.3157 cm  # total head loss in the flocculator
HW_FlocStart := HW_FlocEnd + HL_Floc = 1.62011 m
# Here we are assuming that the entire flocculator has extra tall walls. But that isn't necessary. The walls could be different heights for each channel.
H_Floc := HW_FlocStart + H_PlantFreeboard = 1.72011 m
# 22.
L_FlocTank := N_FlocChannels*L_Sed = 16.9963 m  # Total length of floc tanks
# This is an estimate. It doesn't include ports, head loss, or space taken up by baffles.
Ti_Floc := HW_FlocEnd*L_FlocTank*W_FlocChannel/Q_Plant = 28.9175 min
# The width of the floc port that connects channels will be based on the baffle spacing in that channel
# 23.
W_FlocPortEst := S_FlocBaffle = [10.2969; 12.4964; 17.4453; 18.574] cm
H_FlocPortEst := W_FlocChannel = 0.45 m
# This keeps the energy dissipation rate through the ports the same as through the baffles since the dimension of the port is actually exactly the same as the dimension through the baffles
A_FlocPort := W_FlocPortEst*H_FlocPortEst
W_FlocPort :=
    for i ∈ 0 .. last(W_FlocPortEst) - 1
        W_port[i] ← W_FlocPortEst[i] - S_FlocChannel
    W_port[last(W_FlocPortEst)] ← W_InletChannel
    W_port  # Forces the width of the last channel to be equal to that of the inlet to the sed tank
AddWidth := W_FlocPort[N_FlocChannels - 1] - (W_FlocPortEst[N_FlocChannels - 1] - S_FlocChannel)
AddWidth = 0.14778 m  # the additional width of the inlet channel compared to what would have been calculated otherwise
H_FlocPort := A_FlocPort/W_FlocPort
## Position calculations for each baffle
# Now we need to assign positions, lengths and elevations to floc baffles
# 24.
L_FlocBaffleLower := HW_FlocEnd - S_FlocBaffle*Pi_FlocBaffle = [1.33398; 1.31199; 1.2625; 1.25121] m
# H.Floc should be an array with an element for each channel
L_FlocBaffleUpper := (H_Floc - .5*H_PlantFreeboard) - S_FlocBaffle*Pi_FlocBaffle = [1.56714; 1.54514; 1.49565; 1.48437] m
# I subtracted half of the freeboard height from the height of the flocculator to find the length of the upper baffles so that the water will have somewhere to go before spilling out in case of an overloaded flow rate. (This was Monroe's suggestion). Make sure this looks correct on autocad drawing!
# right now, we are forcing the x-coordinates of the baffles to adjust according to specific conditions - would we rather have these parameters be fixed in the code above?
# 25.
X_FlocBaffles :=
    for channel ∈ 0 .. N_FlocChannels - 2
        for i ∈ 0 .. N_FlocChannelBaffles[channel] - 1
            x[i, channel] ← S_FlocBaffle[channel] + B_FlocBaffle[channel]*i
    if (S_FlocChannel + W_InletChannel) > S_FlocBaffle[N_FlocChannels - 1] and (2*S_FlocBaffle[N_FlocChannels - 1]) > (S_FlocChannel + W_InletChannel)
        S_FlocBaffle[N_FlocChannels - 1] ← SofN_FlocBaffleF(L_Sed - AddWidth - 2*S_FlocChannel, T_FlocBaffle, N_FlocChannelSpaces[N_FlocChannels - 1])
        for i ∈ 0 .. N_FlocChannelBaffles[N_FlocChannels - 1] - 1
            x[i, N_FlocChannels - 1] ← (S_FlocBaffle[N_FlocChannels - 1] + T_FlocBaffle)*i + S_FlocChannel + W_InletChannel
        x[i, N_FlocChannels - 1]
    if (S_FlocChannel + W_InletChannel) > (2*S_FlocBaffle[N_FlocChannels - 1])
        N_FlocChannelSpaces[N_FlocChannels - 1] ← N_FlocChannelSpaces[N_FlocChannels - 1] - 2
        N_FlocChannelBaffles[N_FlocChannels - 1] ← N_FlocChannelBaffles[N_FlocChannels - 1] - 2
        S_FlocBaffle[N_FlocChannels - 1] ← SofN_FlocBaffleF(L_Sed - AddWidth - 2*S_FlocChannel, T_FlocBaffle, N_FlocChannelSpaces[N_FlocChannels - 1])
        for i ∈ 0 .. N_FlocChannelBaffles[N_FlocChannels - 1] - 1
            x[i, N_FlocChannels - 1] ← S_FlocBaffle[N_FlocChannels - 1] + B_FlocBaffle[N_FlocChannels - 1]*i + W_InletChannel - W_FlocPort[N_FlocChannels - 1]
        x[i, N_FlocChannels - 1]
    otherwise
        for i ∈ 0 .. N_FlocChannelBaffles[N_FlocChannels - 1] - 1
            x[i, N_FlocChannels - 1] ← S_FlocBaffle[channel] + B_FlocBaffle[channel]*i
        x[i, N_FlocChannels - 1]
    return x
# if the width of the inlet channel (plus the "lip") is greater than the spacing in the last channel,
# but not more than double the spacing in the last channel, respace the baffles according to the
# port dimensions
# X array is the distance from the inside of the wall of the floc tank (on the side of the plant that has the inlet channel to the sed tank) to the face of the baffle closest to that end of the floc tank
# if the width of the inlet channel (plus "lip") is greater than two times the spacing of the baffles
# in the previous channel, subtract two baffles and respace
# otherwise space normally
# for debugging purposes:
2*S_FlocBaffle[last(S_FlocBaffle)] = 0.371481 m
S_FlocBaffle[N_FlocChannels - 1] = 0.18574 m
S_FlocChannel + W_InletChannel = 0.33352 m
# if this value is between the left
# and right values, the spacing in the
# last channel should simply be re-
# calculated
# if this value is greater than both values,
# two baffles should be substracted in
# the last channel
X_FlocBaffles = [
    0.102969, 0.124964, 0.174453, 0.33352;
    0.245938, 0.289928, 0.388907, 0.546219;
    0.388907, 0.454892, 0.60336, 0.758919;
    0.531875, 0.619856, 0.817813, 0.971618;
    0.674844, 0.78482, 1.03227, 1.18432;
    0.817813, 0.949784, 1.24672, 1.39702;
    0.960782, 1.11475, 1.46117, 1.60972;
    1.10375, 1.27971, 1.67563, 1.82242;
    1.24672, 1.44468, 1.89008, 2.03511;
    1.38969, 1.60964, 2.10453, 2.24781;
    1.53266, 1.7746, 2.31899, 2.46051;
    1.67563, 1.93957, 2.53344, 2.67321;
    1.8186, 2.10453, 2.74789, 2.88591;
    1.96156, 2.2695, 2.96235, 3.09861;
    2.10453, 2.43446, 3.1768, 3.31131;
    2.2475, 2.59943, 3.39125, 3.52401;
    2.39047, 2.76439, 3.60571, 3.73671;
    2.53344, 2.92935, 3.82016, 3.94941;
    2.67641, 3.09432, 4.03461, 0;
    2.81938, 3.25928, 0, 0;
    2.96235, 3.42425, 0, 0;
    3.10532, 3.58921, 0, 0;
    3.24828, 3.75417, 0, 0;
    3.39125, 3.91914, 0, 0;
    3.53422, 4.0841, 0, 0;
    3.67719, 0, 0, 0;
    3.82016, 0, 0, 0;
    3.96313, 0, 0, 0;
    4.1061, 0, 0, 0
] m
# 26.
Channelsnew := 0 .. N_FlocChannels - 2  # I added this to fix the bug in Z.FlocBaffles
# Z array is the elevation of the bottom of the baffle
Z_FlocBaffles :=
    for channel ∈ Channelsnew
        for i ∈ 0 .. N_FlocChannelBaffles[channel] - 1
            z[i, channel] ← mod(i, 2)*S_FlocBaffle[channel]
    for i ∈ 0 .. N_FlocChannelBaffles[last(N_FlocChannelBaffles)] - 1
        z[i, N_FlocChannels - 1] ← mod(i + 1, 2)*S_FlocBaffle[N_FlocChannels - 1]
    return z
# For the last channel, the up/down placement of the
# baffles needed to be down at the channel port and
# up at the exit port.
# There was a bug because there are more Z values in the last channel than in the second to last channel. I fixed it.
Z_FlocBaffles = [
    0, 0, 0, 0.18574;
    0.102969, 0.124964, 0.174453, 0;
    0, 0, 0, 0.18574;
    0.102969, 0.124964, 0.174453, 0;
    0, 0, 0, 0.18574;
    0.102969, 0.124964, 0.174453, 0;
    0, 0, 0, 0.18574;
    0.102969, 0.124964, 0.174453, 0;
    0, 0, 0, 0.18574;
    0.102969, 0.124964, 0.174453, 0;
    0, 0, 0, 0.18574;
    0.102969, 0.124964, 0.174453, 0;
    0, 0, 0, 0.18574;
    0.102969, 0.124964, 0.174453, 0;
    0, 0, 0, 0.18574;
    0.102969, 0.124964, 0.174453, 0;
    0, 0, 0, 0.18574;
    0.102969, 0.124964, 0.174453, 0;
    0, 0, 0, 0;
    0.102969, 0.124964, 0, 0;
    0, 0, 0, 0;
    0.102969, 0.124964, 0, 0;
    0, 0, 0, 0;
    0.102969, 0.124964, 0, 0;
    0, 0, 0, 0;
    0.102969, 0, 0, 0;
    0, 0, 0, 0;
    0.102969, 0, 0, 0;
    0, 0, 0, 0
] m
# 27.
L_FlocBaffles :=
    for channel ∈ Channelsnew
        for i ∈ 0 .. N_FlocChannelBaffles[channel] - 1
            l[i, channel] ← L_FlocBaffleUpper[channel] if mod(i, 2) == 1
            l[i, channel] ← L_FlocBaffleLower[channel] otherwise
    for i ∈ 0 .. N_FlocChannelBaffles[last(N_FlocChannelBaffles)] - 1
        l[i, N_FlocChannels - 1] ← L_FlocBaffleLower[N_FlocChannels - 1] if mod(i, 2) == 1
        l[i, N_FlocChannels - 1] ← L_FlocBaffleUpper[N_FlocChannels - 1] otherwise
    return l  # This had the same bug that the Z baffle did so I fixed it.
# L array is the total height (length) of the baffle
# For the last channel, the length of the
# baffles needed to be changed since the
# up/down had been adjusted.
L_FlocBaffles = [
    1.33398, 1.31199, 1.2625, 1.48437;
    1.56714, 1.54514, 1.49565, 1.25121;
    1.33398, 1.31199, 1.2625, 1.48437;
    1.56714, 1.54514, 1.49565, 1.25121;
    1.33398, 1.31199, 1.2625, 1.48437;
    1.56714, 1.54514, 1.49565, 1.25121;
    1.33398, 1.31199, 1.2625, 1.48437;
    1.56714, 1.54514, 1.49565, 1.25121;
    1.33398, 1.31199, 1.2625, 1.48437;
    1.56714, 1.54514, 1.49565, 1.25121;
    1.33398, 1.31199, 1.2625, 1.48437;
    1.56714, 1.54514, 1.49565, 1.25121;
    1.33398, 1.31199, 1.2625, 1.48437;
    1.56714, 1.54514, 1.49565, 1.25121;
    1.33398, 1.31199, 1.2625, 1.48437;
    1.56714, 1.54514, 1.49565, 1.25121;
    1.33398, 1.31199, 1.2625, 1.48437;
    1.56714, 1.54514, 1.49565, 1.25121;
    1.33398, 1.31199, 1.2625, 0;
    1.56714, 1.54514, 0, 0;
    1.33398, 1.31199, 0, 0;
    1.56714, 1.54514, 0, 0;
    1.33398, 1.31199, 0, 0;
    1.56714, 1.54514, 0, 0;
    1.33398, 1.31199, 0, 0;
    1.56714, 0, 0, 0;
    1.33398, 0, 0, 0;
    1.56714, 0, 0, 0;
    1.33398, 0, 0, 0
] m
