# [reference: BasicInputs3Sed1Bay.xmcd]
# [reference: ExpertInputs.xmcd]
# [reference: DesignAssumptions.xmcd]
# [reference: MathFunctions.xmcd]
# [reference: PipeDatabase.xmcd]
# [reference: MinorLossCoefficients.xmcd]
# [reference: FluidsFunctions.xmcd]
# [reference: Sedimentation Tank.xmcd]
# [reference: Floc Hopper - New Design.xmcd]
# [reference: FCM.xmcd]
# [reference: Flocculator 3.xmcd]
ED_Floc = [20; 2] mW/kg
# [reference: RapidMixer.xmcd]
# [reference: EntranceTankDim.xmcd]
# [reference: Materials List.xmcd]
# Should go into Basis of Design. Doesn't really need to be accesible even to experts
ED_Floc := [6; 6]*mW/kg
Pi_ΤSMin := 3
W_GritWeir := 15 cm  # Does this need to be here? This length needs to be defined by the floating floc team.
# Recalculate minimum flow rate using new energy dissipation
Q_Plant := 100*L/s
# The new flocculation model more carefully distinguishes between maximum and average energydissipation rates. The flocculators should be designed based on a maximum allowed energy dissipation rate to ensure that suboptimal geometry (high h/b ratios) doesn't result in excessively high energy dissipation rates that could break flocs. However, since this model is now incorporating the concept of a maximum energy dissipation rate the energy dissipation rate guidelines need to be increased to account for the distinction between average and maximum.
# Because we are now using the concept of a maximum energy dissipation rate it should be possible to directly incorporate results from laminar flow flocculators to produce guidelines on the maximum allowable energy dissipation rates. One caveat is that the turbulent flow energy dissipation rates are time averaged and it is not yet clear what the expected temporal variability is for turbulent flow energy dissipation rates.
# CFD results and functions
# all design values from Yi, Wenqi, 2009
# The fraction of the maximum collision potential that could be achieved if the energy dissipation rate was uniformly distributed. Or, if this fraction of the available energy were uniformly distributed the collision potential would be the same as what it is given the nonuniformity in the energy dissipation rate distribution.
# ratio of water depth to baffle spacing
# Note that this data (ψ.Pdat) can not be used directly in design because it has units! It only applies to the case for b=0.1m (the case used in the CFD FLUENT analysis).
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ψ_Pdat := [0.49962; 0.65143; 0.67122; 0.71292; 0.89548; 1.00041; 1.24420; 1.45759; 2.15668]*m^(2/3)
Pi_ΤSdat := [2; 3; 4; 5; 8; 10; 15; 20; 40]  # Τ/S*values
α_ψdat := [0.65; 0.86; 0.87; 0.85; 0.71; 0.64; 0.53; 0.46; 0.33]
# The maximum energy dissipation rate is loosely defined as the the maximum energy dissipation rate that is seen by a significant fraction of the flow. We don't have a good way to characterize this parameter analytically yet, but I estimated this using the color contours of the energy dissipation rate (data from Yi, Wenqi, 2009). Note the very large values of this ratio for high h/b ratios. High h/b ratios have very nonuniform energy dissipation rates.
# Minor loss coefficient. This many equivalents of the kinetic energy are lost through one baffle. Note that the minor loss coefficient is very large for small h/b values
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K_Pdat := [9.60; 7.17; 4.32; 3.42; 3.15; 3.13; 3.22; 3.39; 3.84]
α_εdat := [1.875617391; 1.808368729; 1.776938668; 1.927164849; 3.356408643; 4.221784408; 6.332676611; 7.793864103; 13.75322341]
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α_ψ(Pi_ΤS) := linterp(Pi_ΤSdat, α_ψdat, Pi_ΤS)  # These functions use linear interpolation to create functional relationships as a function of the h/b ratios
α_ε(Pi_ΤS) := linterp(Pi_ΤSdat, α_εdat, Pi_ΤS)
K_P(Pi_ΤS) := linterp(Pi_ΤSdat, K_Pdat, Pi_ΤS)
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# True for h/b>5
3^(1/3) = 1.44225
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b := 0.1*m
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# True for h/b>3
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## Flocculator Functions
N_SpacesEst
N_FlocSpacesF(L, Τ, S) := Round((L + Τ)/(S + Τ) + 1, 2) - 1  # The Floor function forces the number of baffle spaces to be an odd integer
# Round to odd number instead of floor to get closer to desired Energy Dissipation
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SofN_FlocBaffleF(L, Τ, N_Spaces) := (L + Τ)/N_Spaces - Τ
# Generic
# Ρ
# S
# Τ
# Vertical
# W
# S
# H
# Horizontal
# H
# S
# W
# The function below can also be used directly to solve for Ρ by substituting S for Ρ
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# recursive function
S_FlocBaffleIterative(Q, Ρ, Τ, S, ED) := (K_P(Τ/S)*α_ε(Τ/S)/(2*Τ*ED))^(1/3)*Q/Ρ
# From Monroe's Flocculation notes
S_FlocBaffleNonIterative(Q, P, Pi_TS, ED) := (Q/P)^(3/4)*(1/Pi_TS)^(1/4)*(K_P(Pi_TS)*α_ε(Pi_TS)/(2*ED))^(1/4)
ED_FlocBaffleNonIterative(Q, P, Pi_TS, S) := ((Q/P)^(3/4)*(1/Pi_TS)^(1/4)*(K_P(Pi_TS)*α_ε(Pi_TS)/2)^(1/4)/S)^4
S_FlocBaffleF(Q, Ρ, Τ, ED) :=
    S ← S_FlocBaffleIterative(Q, Ρ, Τ, Τ/4, ED)
    error ← 1
    while error > 0.001
        S_new ← S_FlocBaffleIterative(Q, Ρ, Τ, S, ED)
        error ← |S - S_new|/(S + S_new)
        S ← S_new
    return S
# This function returns a spacing that gives the target energy dissipation rate.
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# Collision potential per baffle (p for pantalla)
ψ_P(Τ, S) := (Τ^2*α_ψ(Τ/S)*K_P(Τ/S)/2)^(1/3)
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ED(Q, Τ, S, Ρ) := α_ε(Τ/S)*K_P(Τ/S)/(2*Τ)*(Q/(Ρ*S))^3
ED_Target(ψ) :=
    Pi ← [0.4; 0.7]
    m ← (ED_Floc[0] - ED_Floc[1])/((Pi[0] - Pi[1])*CP_Floc)
    b ← ED_Floc[0] - m*Pi[0]*CP_Floc
    ED_Target ← ED_Floc[0] if ψ ≤ Pi[0]*CP_Floc
    ED_Target ← m*ψ + b if ψ > Pi[0]*CP_Floc and ψ ≤ Pi[1]*CP_Floc
    ED_Target ← ED_Floc[1] if ψ > Pi[1]*CP_Floc
    return ED_Target
# This function gives a reasonable relationship between maximum energy dissipation rate and collision potential through a flocculator. This function is a placeholder until we get better information from our research teams.
#
# We can tweak these Pi terms to get the baffle distribution that we like and the head loss that we like
# The Pi terms determine at what fraction of the total collision potential does the energy dissipation rate start to drop and at what energy dissipation rate does it level off again.
# The following function cycles through each flocculator channel and checks the possible range of the number of baffles in a channel to see which number of baffles results in the correct energy dissipation rate and cumulative collision potential at the end of the channel.
N_FlocChannelSpacesF(ED_ChannelRange, ψ_ChannelRange, N_FlocBafflesMax, N_FlocBafflesMin) :=
    ψ_Cumulative ← 0
    Channel ← 0
    while ψ_Cumulative < CP_Floc
        i ← 0
        j ← 0
        while ED_ChannelRange[j] ≤ ED_Target(ψ_ChannelRange[j] + ψ_Cumulative) and i < (N_FlocBafflesMax - N_FlocBafflesMin)
            i ← i + 2
            j ← j + 1
        ψ_Cumulative ← ψ_Cumulative + ψ_ChannelRange[j]
        N_FlocChannelSpaces[Channel] ← i + N_FlocBafflesMin
        Channel ← Channel + 1
    N_FlocChannelSpaces[last(N_FlocChannelSpaces)] ← N_FlocChannelSpaces[last(N_FlocChannelSpaces)]
    return N_FlocChannelSpaces
# The number of baffles in the last channel needs to remain odd
# so that the water flows can flow through the exit port to
# the sed tank.
## Calculation of Flocculator Geometry
HW_FlocEnd := HW_Sed = 1.43695 m
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Ρ_FlocChannel := HW_FlocEnd
# Generic
# Ρ
# S
# Τ
# Vertical
# W
# S
# H
# Horizontal
# H
# S
# W
# No There will be headloss
P_FlocChannelMin := HW_FlocEnd  # I added this in case it is useful later.
P_FlocChannelMin = 1.43695 m
S_FlocBaffleCalc := S_FlocBaffleNonIterative(Q_Plant, Ρ_FlocChannel, Pi_ΤSMin, ED_Floc[last(ED_Floc)]) = 0.590261 m
S_FlocBaffleMax := SofN_FlocBaffleF(L_Sed, T_FlocBaffle, N_FlocSpacesF(L_Sed, T_FlocBaffle, HW_FlocEnd/Pi_ΤSMin)) = 0.436563 m
# Cant just have HW.FlocEnd here for horizontal!
# I changed this from T.FlocChannel to P.FlocChannel. I think it was just a mistake?
S_FlocBaffleMin := W_FlocChannelMin = 0.45 m
# Minimum Flow Rate for Horizontal Flocculation
S_Min := 45 cm
T_Min := Pi_ΤSMin*S_Min
Q_MinHorizontal(P, S, Pi_TS, ED, T) := P*S*(T*2*ED/(K_P(Pi_TS)*α_ε(Pi_TS)))^(1/3)
Q_MinHorizontal(Ρ_FlocChannel, S_Min, Pi_ΤSMin, ED_Floc[0], T_Min) = 69.6451 L/s
S_FlocBaffle := max(S_FlocBaffleCalc, S_FlocBaffleMin) = 0.590261 m  # Can get rid of this once have algorithm that chooses btw horizontal and vertical
T_FlocChannel := S_FlocBaffle*Pi_ΤSMin
# The minimum is technically zero (i.e. no baffles), but should avoid divide by zero problems (the number of baffles must be an even integer).  The number of baffles should be one less than the number of spaces
N_FlocSpaces := N_FlocSpacesF(L_Sed, T_FlocBaffle, S_FlocBaffle) = 7
ψ_Space := ψ_P(T_FlocChannel, S_FlocBaffle) = 2.13029 m^(2/3)
ED_Space := ED_Floc[0]
# Calculate the number of spaces in each channel
Q_Plant = 0.1 m^3/s
CP_Floc = 110 m^(2/3)
CP_Channel := N_FlocSpaces*ψ_Space = 14.9121 m^(2/3)
N_FlocChannelSpacesTotal := ceil(CP_Floc/ψ_Space) = 52
# Should this be celing?
N_FlocChannels := ceil(N_FlocChannelSpacesTotal/N_FlocSpaces) = 8
N_FlocChannels := ceil(CP_Floc/CP_Channel) = 8
# Create an array with floc spaces per channel?
Channels := 0 .. N_FlocChannels - 1  # range variable for the floc channels
N_FlocChannelSpaces[Channels] := N_FlocSpaces
# Is it a problem that these are in boxes instead of parentheses?
N_FlocChannelSpaces = [7; 7; 7; 7; 7; 7; 7; 7]  # Should all be odd
N_FlocChannelBaffles := N_FlocChannelSpaces - 1
N_FlocChannelBaffles = [6; 6; 6; 6; 6; 6; 6; 6]
N_FlocBaffles := sum(N_FlocChannelBaffles) = 48  # Total number of baffles in the flocculator
# Now we need to calculate the following for each channel
# baffle center to center distance
# baffle separation distance
# head loss in each channel
S_FlocBaffle := SofN_FlocBaffleF(L_Sed, T_FlocBaffle, N_FlocChannelSpaces)
S_FlocBaffle = [0.572724; 0.572724; 0.572724; 0.572724; 0.572724; 0.572724; 0.572724; 0.572724] m
T_FlocChannel := Pi_ΤSMin*S_FlocBaffle[0]
# Verify that the channels are all the correct length...
L_Sed = 4.24907 m
vectorize(N_FlocChannelSpaces*S_FlocBaffle) + (N_FlocChannelSpaces - 1)*T_FlocBaffle = [4.24907; 4.24907; 4.24907; 4.24907; 4.24907; 4.24907; 4.24907; 4.24907] m
ED_FlocChannel[Channels] := ED(Q_Plant, T_FlocChannel, S_FlocBaffle[Channels], Ρ_FlocChannel)
ED_FlocBaffleNonIterative(Q_Plant, Ρ_FlocChannel, Pi_ΤSMin, S_FlocBaffle) = [6.76937; 6.76937; 6.76937; 6.76937; 6.76937; 6.76937; 6.76937; 6.76937] mW/kg
ED_FlocChannel = [6.76937; 6.76937; 6.76937; 6.76937; 6.76937; 6.76937; 6.76937; 6.76937] mW/kg  # This is the actual energy dissipation rate in each channel
# Calculate the collision potential for each channel
CP_FlocChannel[Channels] := ψ_P(T_FlocChannel, S_FlocBaffle[Channels])*N_FlocChannelSpaces[Channels]
CP_FlocTotal := sum(CP_FlocChannel) = 116.922 m^(2/3)
B_FlocBaffle := S_FlocBaffle + T_FlocBaffle  # center to center distance
HL_FlocBaffle := K_P(T_FlocChannel/S_FlocBaffle)*Q_Plant^2/(2*g*(S_FlocBaffle*Ρ_FlocChannel)^2)  # head loss per baffle in each channel
HL_FlocBaffle = [0.00539752; 0.00539752; 0.00539752; 0.00539752; 0.00539752; 0.00539752; 0.00539752; 0.00539752] m
HL_Floc := HL_FlocBaffle*N_FlocChannelSpaces = 0.302261 m
HW_FlocStart := HW_FlocEnd + HL_Floc = 1.73921 m
# total head loss in the flocculator
# Here we are assuming that the entire flocculator has extra tall walls. But that isn't necessary. The walls could be different heights for each channel.
H_Floc := HW_FlocStart + H_PlantFreeboard = 1.83921 m
L_FlocTank := N_FlocChannels*L_Sed = 33.9925 m  # Total length of floc tanks
# Still use HW.FlocEnd?
Ti_Floc := HW_FlocEnd*L_FlocTank*Ρ_FlocChannel/Q_Plant = 11.6981 min
# The width of the floc port that connects channels will be based on the baffle spacing in that channel
W_FlocPortEst := S_FlocBaffle = [57.2724; 57.2724; 57.2724; 57.2724; 57.2724; 57.2724; 57.2724; 57.2724] cm
H_FlocPortEst := Ρ_FlocChannel = 1.43695 m
# This keeps the energy dissipation rate through the ports the same as through the baffles since the dimension of the port is actually exactly the same as the dimension through the baffles
A_FlocPort := W_FlocPortEst*H_FlocPortEst
# This will change for horizontal!
W_FlocPort := W_FlocPortEst - S_FlocChannel
H_FlocPort := A_FlocPort/W_FlocPort
## Position calculations for each baffle
# Now we need to assign positions, lengths and elevations to floc baffles
L_FlocBaffleLower := T_FlocChannel - S_FlocChannel = 1.66817 m
L_FlocBaffleUpper := T_FlocChannel - S_FlocChannel = 1.66817 m
X_FlocBaffles :=
    for channel ∈ Channels
        for i ∈ 0 .. N_FlocChannelBaffles[channel] - 1
            x[i, channel] ← S_FlocBaffle[channel] + B_FlocBaffle[channel]*i
    return x
# Keep same code as vertical flocculator? Modify for odd number of spaces in last channel instead of even?
# X array is the distance from the inside of the wall of the floc tank (on the side of the plant that has the inlet channel to the sed tank) to the face of the baffle closest to that end of the floc tank
X_FlocBaffles = [
    0.572724, 0.572724, 0.572724, 0.572724, 0.572724, 0.572724, 0.572724, 0.572724;
    1.18545, 1.18545, 1.18545, 1.18545, 1.18545, 1.18545, 1.18545, 1.18545;
    1.79817, 1.79817, 1.79817, 1.79817, 1.79817, 1.79817, 1.79817, 1.79817;
    2.41089, 2.41089, 2.41089, 2.41089, 2.41089, 2.41089, 2.41089, 2.41089;
    3.02362, 3.02362, 3.02362, 3.02362, 3.02362, 3.02362, 3.02362, 3.02362;
    3.63634, 3.63634, 3.63634, 3.63634, 3.63634, 3.63634, 3.63634, 3.63634
] m
S_FlocChannel + W_InletChannel = 0.33352 m
2*S_FlocBaffle[last(S_FlocBaffle)] = 1.14545 m
S_FlocBaffle = [0.572724; 0.572724; 0.572724; 0.572724; 0.572724; 0.572724; 0.572724; 0.572724] m
Z_FlocBaffles :=
    for channel ∈ Channels
        for i ∈ 0 .. N_FlocChannelBaffles[channel] - 1
            z[i, channel] ← mod(i, 2)*S_FlocBaffle[channel]
            z[i, N_FlocChannels - 1] ← mod(i + 1, 2)*S_FlocBaffle[N_FlocChannels - 1]
    return z
# Z array is the elevation of the bottom of the baffle
# I think this is for vertical still. Aren't they all just 0 elevation?
Z_FlocBaffles = [
    0, 0, 0, 0, 0, 0, 0, 0.572724;
    0.572724, 0.572724, 0.572724, 0.572724, 0.572724, 0.572724, 0.572724, 0;
    0, 0, 0, 0, 0, 0, 0, 0.572724;
    0.572724, 0.572724, 0.572724, 0.572724, 0.572724, 0.572724, 0.572724, 0;
    0, 0, 0, 0, 0, 0, 0, 0.572724;
    0.572724, 0.572724, 0.572724, 0.572724, 0.572724, 0.572724, 0.572724, 0
] m
L_FlocBaffles :=
    for channel ∈ Channels
        for i ∈ 0 .. N_FlocChannelBaffles[channel] - 1
            l[i, channel] ← L_FlocBaffleLower[channel] if mod(i, 2) == 1
            l[i, channel] ← L_FlocBaffleUpper[channel] otherwise
    return l  # error: This value must be a vector.  # L array is the total height (length) of the baffle
# For the last channel, the length of the
# baffles needed to be changed since the
# up/down had been adjusted.
L_FlocBaffles =  # error: This variable is undefined.
