# Automated Materials List
N_SedPlatesTotal := N_SedPlates*N_SedBays*N_SedTanks
N_SedPlatesPerSheet := floor(L_SedPlateSheet/L_SedPlate)
N_SedPlateSheets := ceil(N_SedPlatesTotal/N_SedPlatesPerSheet)  # Total number of corrugated sheets needed to construct lamella/plate settlers
# Channel and Tank Walls
Vol_FlocTank := 2*(L_Sed + T_PlantWall)*T_PlantWall*H_Floc + 2*(W_FlocChannel*N_FlocChannels + N_FlocChannels*T_PlantWall)*T_PlantWall*H_Floc + (N_FlocChannels - 1)*T_PlantWall*L_Sed*H_Floc
Vol_FlocWalls := 2*(L_Floc + T_PlantWall)*T_PlantWall*H_Floc*N_FlocChannels + 2*W_FlocChannel*T_PlantWall*H_Floc*N_FlocChannels + (T_PlantWall*T_PlantWall*H_Floc*(N_FlocChannels + 1))
A_FlocWalls := Vol_FlocWalls/T_PlantWall
A_FlocFloor := (L_Floc + 2*T_PlantWall)*(W_FlocChannel*N_FlocChannels + T_PlantWall*(N_FlocChannels + 1))
Vol_FlocFloor := A_FlocFloor*T_FlocFloor  # **Should we create variable T.FlocFloor or use existing variable T.Mp for floor thickness**
Vol_InletChannel := (W_InletChannel*H_InletChannel*T_SedManifoldEntrance) + (W_InletChannel + 2*T_ChannelWall)*T_PlantWall*L_Channel + 2*(L_Channel*T_ChannelWall*H_InletChannel) - (A_SedManifoldEntrance*T_SedManifoldEntrance*N_SedInletPipes)
# **Includes Sedimentation Manifold Entrance**
Vol_ExitChannel := (W_ExitChannel + 2*T_PlantWall)*T_PlantWall*H_ExitChannel + 2*(L_ExitChannel*T_ChannelWall*H_ExitChannel)
# **Does not include inlet from sed tank and exit to storage tank**
Vol_ExitChannel := (W_ExitChannel + 2*T_ChannelWall)*T_ChannelWall*L_ExitChannel + 2*H_ExitChannel + T_ChannelWall*L_ExitChannel
# **We redefine Vol.ExitChannel because we weren't sure of the validity of the previously defined variable**
A_ExitChannel := (W_ExitChannel + 2*T_ChannelWall)*L_ExitChannel + 2*(H_ExitChannel + T_ChannelWall)*L_ExitChannel
Vol_SedTank := 2*((L_Sed + T_PltWall)*T_PlantWall*H_Sed) + 2*(W_Sed*N_SedTanks + N_SedTanks*T_PltWall)*T_PlantWall*H_Sed - (A_SedSludge*L_Sed)
A_SedWalls := □[□]  # error: This placeholder is empty.
Vol_SedWalls := Vol_SedTank  # **We are unsure which thickness is T.PltWall and which is T.PlantWall**
A_SedFloor := L_Sed*((N_SedTanks*W_Sed) + (N_SedTanks + 1)*T_PltWall)
# **Should we create variable T.SedFloor or use existing variable T.Mp for floor thickness**
Vol_SedFloor := A_SedFloor*T_SedFloor
Vol_EntranceTank := 2*(W_Et*T_EtWall*H_Et) + 2*(L_Et*T_EtWall*H_Et) - (T_EtWall*W_EtChannel*W_EtChannel)
# **basic dimensions - no grit chamber**
A_EtWalls := 2*(H_Et*(L_Et + T_EtWall)) + 2*H_Et(W_Et + 2*T_EtWall) - W_EtChannel*W_EtChannel
A_EtFloor := (W_Et + 2*T_EtWall)*(L_Et + 2*T_EtWall)
# **Assuming L.Et is marked as the top diagram on the materials list wiki**
Vol_EtWalls := Vol_EntranceTank
Vol_EtFloor := (L_Et + 2*T_EtWall)*(W_Et + 2*T_EtWall)*T_EtFloor
Vol_StockTank := Q_AlumStockMax*Ti_StockMin  # **Assuming Stock Tank is a right cylinder with height = 2r to minimize surface area**
R_StockTank := (Vol_StockTank/(2*pi))^(1/3)  # **new variable defined here**
A_StockTank := 6*pi*R_StockTank  # **new variable defined here**
A_StockTankFloor := Vol_StockTank/(2*R_StockTank)  # **new variable defined here**
Vol_ExitChannelTank := (2*(S_Elbow + 3*ND_PltWeir + T_ChannelWall) + 2*(4*ND_PltWeir + 3*S_Elbow + T_ChannelWall))*H_Sed*T_ChannelWall
A_ExitChannelWalls := L_Channel*(H_ExitChannel + T_ExitChannel)
A_ExitChannelFloor := L_Channel*(W_ExitChannel + 2*T_ExitChannel)
Vol_ExitChannelWalls := 2*L_Channel*H_ExitChannel*T_ExitChannel
Vol_ExitChannelFloor := L_Channel*(W_ExitChannel + 2*T_ExitChannel)*T_ExitChannel
# **Perhaps replace "T.ExitChannel with T.ChannelWall**
Vol_InletChannelTank := (2*(S_Elbow + 3*ND_PltWeir + T_ChannelWall) + 2*(2*ND_PltWeir + 2*S_Elbow + T_ChannelWall))*H_Sed*T_ChannelWall
A_InletChannelWalls := L_Channel*(H_InletChannel + T_InletChannel)
A_InletChannelFloor := L_Channel*(W_InletChannel + 2*T_InletChannel)
Vol_InletChannelWalls := 2*L_Channel*H_InletChannel*T_InletChannel
Vol_InletChannelFloor := L_Channel*(W_InletChannel + 2*T_InletChannel)*T_InletChannel
# **Perhaps replace "T.InletChannel with T.ChannelWall**
N_SedInletChimneys := N_SedInletPipes*N_SedBays*N_SedTanks
Vol_SedChimneyPipe := π*(.5*D_SedChimneyPipe)^2*(H_Sed - H_InletChannel - T_ChannelWall - H_SedSludge - T_SedSludge)
Vol_SedInletChimneys := N_SedInletChimneys*(W_SedInletBottom*(W_InletChannel + T_ChannelWall)*(H_Sed - H_InletChannel - T_ChannelWall - H_SedSludge - T_SedSludge) - Vol_SedChimneyPipe)
Vol_TotalWalls := Vol_EntranceTank + Vol_FlocTank + Vol_InletChannel + Vol_SedTank + Vol_ExitChannel + Vol_StockTank + Vol_ExitChannelTank + Vol_InletChannelTank + Vol_SedInletChimneys
# Ferrous Cement
Vol_DistributionTunnelCovers := T_SedSlopePlate*L_SedSlopeManifold*W_SedSlopePlate*N_SedPorts
A_DistributionTunnelCovers := Vol_DistributionTunnelCovers/T_SedSlopePlate
Vol_FlocBafflesTotal := W_FlocChannel*T_FlocBaffle*(L_FlocBaffleLower*ceil(N_FlocChannelBaffles/2) + L_FlocBaffleUpper*floor(N_FlocChannelBaffles/2))
A_FlocBafflesTotal := Vol_FlocBafflesTotal/T_FlocBaffle  # **new variable defined here**
# Pipes and Valves
N_PipeSedPlateFrame := W_Sed/B_SedPipe - 1 + L_Sed/B_SedPipe - 1
L_PipeSedPlateFrameTotal := N_SedTanks*((W_Sed/B_SedPipe - 1)*L_Sed + (L_Sed/B_SedPipe - 1)*W_Sed)
# Length of pipe needed for Sedimentation Tank Plate Frame at ND.SedPlateFrame
L_Weir := 2*H_PltWeir  # Total length of Weir pipe in Inlet and Exit Channel Tanks at ND.PltWeir
N_Launders := N_SedTanks*N_SedBays*N_SedLaunders
L_LaunderPipeTotal := L_SedLaunder*N_Launders  # Total length of launder pipe at ND.SedLaunder
N_LaunderCouplings := N_Launders  # Number of couplings for launder pipe going through concrete wall
N_Valves := N_SedBays*N_SedTanks  # Valves and valve couplings to drain sedimentation tanks
N_ValveCouplings := N_Valves
