# Pumped LFSRSF System for India
# MathCAD References
# [reference: ExpertInputs.xmcd]
# Variables Changed after Expert Inputs:
HL_LfomMin := 0.1 m
# Changed to 10 cm to shorten the chemical dosing tubes
HL_LfomMax := 0.1 m
HL_CdcCoag := HL_LfomMin
HL_CdcChlorine := HL_LfomMin
C_CoagDoseMax := 10*mg/L
C_CoagStock := 25*gm/L
EN_Coag := 1
# This is for PACl
D_TubeAvailable := [3.175*10^-3; 4.762*10^-3; 6.35*10^-3; 7.938*10^-3; 9.525*10^-3; 0.011]*m
C_ChlorineStockMax := 5*gm/L
EN_Chlorine := 2
# Note that the ratio of stock to max dose is the same for chlorine and coagulant and that gives the same design for each doser (given that the viscosity is almost the same for both stocks).
C_ChlorineDoseMax = 2 mgm/L
# [reference: MathFunctions.xmcd]
# [reference: PipeDatabase - may.xmcd]
# [reference: MaterialsDatabase.xmcd]
# [reference: FluidsFunctions.xmcd]
# [reference: CdcFunctions.xmcd]
# Assumptions
T_TankWall := 25 cm
L_Wall := 3 m
T_EtBaffle := 5 cm
PS_Fi := 2
H_Bucket5Gal := 50 cm
T_Separator := 15 cm
W_Wall := 3 m
T_Et := 15 cm
V_FiUpflow := 11*mm/s
D_Bucket5Gal := 30 cm
L_TankOffset := 1.2 m
H_Wall := 3 m
T_FiLayer := 20 cm
S_FiInletMan := 40 cm
Z_BottomLowerTank := 6 m
Vol_OverheadTank := L_Wall*W_Wall*H_Wall
L_CdcTubeMax := L_Wall
H_UpperTankOutlet := 10 cm
T_FiCap := 3/8*in
L_FiPipe := 205 cm
T_Platform := 15 cm
S_Walkway := 70 cm
N_FiLayer = 6
T_FiFlange := 3/8*in  # This is the aluminum plate that effectively acts as a flange
N_Fills := 2/day  # number of times you run the system per day
T_FiFlangeLip := 2 in
ND_FiPipeBackup := 12 in
T_OperationIdeal := 3 hr  # per fill
Q_FiBackup := π*innerdiameter(ND_FiPipeBackup, PS_Fi)^2/4*V_FiUpflow
Q_FiEst := Vol_OverheadTank/T_OperationIdeal = 2.5 L/s
Vol_OverheadTank/Q_FiBackup = 9.44165 hr
# The filter ID could actually be set to whatever diameter is best if the filter is fabricated out of aluminum.
ND_FiPipe := NominalPipeSize(sqrt(4*Q_FiEst/V_FiUpflow/π)) = 24 in
Q_Fi := π*innerdiameter(ND_FiPipe, PS_Fi)^2/4*V_FiUpflow = 2.85342 L/s
Rate_Pump := 15*L/s
T_Operation := Vol_OverheadTank/Q_Fi = 2.62843 hr  # per fill
Demand := 0.9*H_Wall*L_Wall*W_Wall = 24300 L
T_PumpRun := Demand/Rate_Pump = 0.45 hr
H_Freeboard := 10 cm
Q_Plant := Q_Fi
HW_UpperTankMax := (Rate_Pump - Q_Fi)*T_PumpRun/(L_Wall*W_Wall) = 2.18638 m
HL_FiDirty := 40 cm
ND_Meter := 3 in
H_StorageMeter := 2/3*H_Wall = 2 m
ND_MeterCasing := 4 in
Ti_CoagStock := T_Operation*N_Fills*7*day = 1.53325 day
# This is much too short for the stock tank duration. I would suggest having the stocks llast at least half a week and preferably a full week. I've changed it to go for a full week
H_StorageMeterCasing := (H_Wall - H_StorageMeter)*1.2 = 1.2 m
Ti_ChlorineStock := T_Operation*N_Fills*7*day = 1.53325 day
# LFOM and Float Valve for Raw Water
# [reference: LFOM.xmcd]
ND_RMPipe = 4 in
ND_RMPipe := 4 in
H_FloatOutletEst := 20 cm
D_FloatValveOrificeEst := sqrt(4*Q_Fi/(π*Pi_VenaContractaOrifice*sqrt(2*g*H_FloatOutletEst))) = 2.12441 in
D_FloatValveOrifice := 2 in
H_FloatOutletMin := h_orifice(D_FloatValveOrifice, Pi_VenaContractaOrifice, Q_Fi) = 0.254604 m
H_FloatOutlet := 35 cm
HL_ChtPiping := H_FloatOutlet - H_FloatOutletMin = 0.0953963 m
L_ChtPiping := 2 m
K_ChtPiping := 3
ND_TankToRawCHT := NextLargest(D_PipeTotal(Q_Fi, HL_ChtPiping, L_ChtPiping, Nu_Water, E_Pvc, K_ChtPiping), AvailND) = 3 in
# Entrance Tank
L_Et := 0.8 m
W_Et := 1.4*(S_EtFloat + 2*ConRadius(ND_EtFloat) + ND_RMPipe + 2*S_Fitting) = 0.602262 m
H_Et := 2*CapHeight(ND_EtFloat) + HL_Lfom + H_Freeboard = 0.35875 m
ND_EtOverflow := D_pipeschedule(Q_Fi, PS_Fi, H_Et, H_Et, Nu_Water, E_Pvc, K_El90) = 1.5 in
HL_EtOverflow := Headloss_weir(Q_Fi, 2*π*outerradius(ND_EtOverflow)) = 0.046781 m
ND_EtInlet := D_pipeschedule(Q_Fi, PS_Fi, H_FloatOutlet, H_FloatOutlet + W_Et, Nu_Water, E_Pvc, 2*K_El90 + K_PipeExit) = 2 in
# Chem Doser, Storage, Calibration Columns
L_CdcCoagTube := L_CdcTube(Q_Plant, C_CoagDoseMax, C_CoagStock, D_TubeAvailable, HL_CdcCoag, L_CdcTubeMax, EN_Coag, K_CdcTube) = 2.07562 m
N_CdcCoagTubes := N_CdcTube(Q_Plant, C_CoagDoseMax, C_CoagStock, D_TubeAvailable, HL_CdcCoag, L_CdcTubeMax, EN_Coag, K_CdcTube) = 1
D_CdcCoag := D_CdcTube(Q_Plant, C_CoagDoseMax, C_CoagStock, D_TubeAvailable, HL_CdcCoag, L_CdcTubeMax, EN_Coag, K_CdcTube) = 2 in/16
(outerdiameter(1 in) - innerdiameter(1 in, PS_Fi))/2 = 3.3782 mm
Q_CoagStock := Q_Plant*C_CoagDoseMax/C_CoagStock = 1.14137 mL/s
C_CoagStock = 25 gm/L
L_CdcChlorineTube := L_CdcTube(Q_Plant, C_ChlorineDoseMax, C_ChlorineStockMax, D_TubeAvailable, HL_CdcChlorine, L_CdcTubeMax, EN_Chlorine, K_CdcTube) = 2.09753 m
N_CdcChlorineTubes := N_CdcTube(Q_Plant, C_ChlorineDoseMax, C_ChlorineStockMax, D_TubeAvailable, HL_CdcChlorine, L_CdcTubeMax, EN_Chlorine, K_CdcTube) = 1
D_CdcChlorine := D_CdcTube(Q_Plant, C_ChlorineDoseMax, C_ChlorineStockMax, D_TubeAvailable, HL_CdcChlorine, L_CdcTubeMax, EN_Chlorine, K_CdcTube) = 2 in/16
C_ChlorineStockMax = 5 gm/L
Q_ChlorineStock := Q_Plant*C_ChlorineDoseMax/C_ChlorineStockMax = 1.14137 mL/s
ND_ChemTubes := max(D_pipeschedule(Q_CoagStock, PS_Fi, 0.01*HL_CdcCoag, 4 m, Nu_Chem(C_CoagStock, EN_Coag), E_Pvc, K_PipeExit + 8*K_El90), D_pipeschedule(Q_ChlorineStock, PS_Fi, 0.01*HL_CdcChlorine, 4 m, Nu_Chem(C_ChlorineStockMax, EN_Coag), E_Pvc, K_PipeExit + 8*K_El90)) = 0.0127 m
ND_ChemTubes = 0.5 in
ND_ChemFlexTubes := max(D_pipe(Q_CoagStock, D_TubeAvailable, 0.01*HL_CdcCoag, 2 m, Nu_Chem(C_CoagStock, EN_Coag), E_Pvc, K_PipeEnt), D_pipe(Q_ChlorineStock, D_TubeAvailable, 0.01*HL_CdcChlorine, 2 m, Nu_Chem(C_ChlorineStockMax, EN_Coag), E_Pvc, K_PipeEnt)) = 0.0111125 m
ND_ChemFlexTubes = 7 in/16
ND_ChemFlexTubesLower := max(D_pipe(Q_CoagStock, D_TubeAvailable, 6*T_FiLayer, 2 m, Nu_Chem(C_CoagStock, EN_Coag), E_Pvc, K_PipeExit + K_PipeEnt), D_pipe(Q_ChlorineStock, D_TubeAvailable, 6*T_FiLayer, 2 m, Nu_Chem(C_ChlorineStockMax, EN_Coag), E_Pvc, K_PipeExit + K_PipeEnt)) = 1 in/8
# [reference: ChemStorageTanks.xmcd]
D_TubeAvailable = [1; 2; 3; 4; 5; 6; 7] in/16
Vol_CoagTank = 208.198 L
H_CoagTank = 0.8509 m
R_CoagTank = 0.28575 m  # use 55 gallon drum
H_ChlorineTank = 0.8509 m
R_ChlorineTank = 0.28575 m
Vol_ChlorineTank = 208.198 L
D_CoagFloatValveOrifice :=
    i ← 0
    while h_orifice(D_FltVlvOrificesAvail[i], Pi_VenaContractaOrifice, Q_CoagStock) ≥ H_CoagTankAboveHeadTank
        i ← i + 1
    return D_FltVlvOrificesAvail[i]
0.5 mm = 0.019685 in
D_CoagFloatValveOrifice = 0.093 in
HL_CoagFloatValveOrifice := h_orifice(D_CoagFloatValveOrifice, Pi_VenaContractaOrifice, Q_CoagStock) = 0.87131 cm
HL_CoagTubeStockToCHMax := H_CoagTankAboveHeadTank - HL_CoagFloatValveOrifice = 29.1287 cm
D_CoagTubeStockToCHEst := NextLargest((128*Nu_Water*1*m*Q_CoagStock/(π*g*HL_CoagTubeStockToCHMax))^(1/4), D_TubeAvailable) = 1 in/8
D_CoagTubeStockToCH := max(3/8*in, D_CoagTubeStockToCHEst) = 3 in/8
D_ChlorineFloatValveOrifice :=
    i ← 0
    while h_orifice(D_FltVlvOrificesAvail[i], Pi_VenaContractaOrifice, Q_CoagStock) ≥ H_CoagTankAboveHeadTank
        i ← i + 1
    return D_FltVlvOrificesAvail[i]
D_ChlorineFloatValveOrifice = 0.093 in
HL_ChlorineFloatValveOrifice := h_orifice(D_ChlorineFloatValveOrifice, Pi_VenaContractaOrifice, Q_CoagStock) = 0.87131 cm
HL_ChlorineTubeStockToCHMax := H_CoagTankAboveHeadTank - HL_ChlorineFloatValveOrifice = 29.1287 cm
D_ChlorineTubeStockToCHEst := NextLargest((128*Nu_Water*1*m*Q_CoagStock/(π*g*HL_ChlorineTubeStockToCHMax))^(1/4), D_TubeAvailable) = 1 in/8
D_ChlorineTubeStockToCH := max(3/8*in, D_ChlorineTubeStockToCHEst) = 3 in/8
# Calibration Column
SF_CalCol := 1.25
Ti_Res := 1.25*min
H_CalCol := 30 cm
Q_CoagCalColMax := SF_CalCol*Q_CoagStock
Vol_CoagCalCol := Ti_Res*Q_CoagCalColMax
D_inCoagCCMin := sqrt(4*Vol_CoagCalCol/(π*H_CalCol)) = 0.838995 in
ND_CoagCalCol := NominalDiameter(D_inCoagCCMin, PS_Default)
D_inCoagCalCol := innerdiameter(ND_CoagCalCol, PS_Default) = 1.175 in
Q_ChlorCalColMax := SF_CalCol*Q_ChlorineStock
Vol_ChlorCalCol := Ti_Res*Q_ChlorCalColMax
D_inChlorCCMin := sqrt(4*Vol_ChlorCalCol/(π*H_CalCol)) = 0.838995 in
ND_ChlorCalCol := NominalDiameter(D_inChlorCCMin, PS_Default)
D_inChlorCalCol := innerdiameter(ND_ChlorCalCol, PS_Default) = 1.175 in
# AutoCAD References
# AutoCAD drawing programs:
# Translators:
# These are the codes that take MathCAD outputs and create AutoCAD scripts that are used to draw the plant (formerly Basics)
# [reference: MtoATranslators.xmcd]
# The wrapped MtoA translator contains the functions that the user will want to access. These functions will draw pieces with full functionality - specifying the location, dimension, and orientation of the object. Also, it contains layer control and subtraction capabilities for grouped objects.
# [reference: MtoATranslatorsWrapped.xmcd]
# Drawing functions:
# [reference: ChannelF.xmcd]
# [reference: PlumbingF.xmcd]
# [reference: TankF.xmcd]
# [reference: StairsF.xmcd]
# [reference: DrainChannelF.xmcd]
# Low Flow Stacked Rapid Sand Filter
Mass_Sand := Rho_FiSand*(1 - ε_FiSand)*innerdiameter(ND_FiPipe, PS_Fi)^2/4*π*T_FiLayer*6 = 494.939 kg
# Internal Manifold and Slot Design
Rho_FiSand*(1 - ε_FiSand)*(T_FiLayer*6)/Rho_H2O = 1.908 m
ND_FiManTrunk := 3 in
ND_FiManBranch := 1 in
H_FiManCap := CapHeight(ND_FiManTrunk)/2
H_FiSand := T_FiLayer*N_FiLayer
L_FiManBulkheadOffset := 0.5*innerdiameter(ND_FiPipe, PS_Fi) - BulkheadSocketOuterD(ND_FiManTrunk)*0.5/tan(asin(BulkheadSocketOuterD(ND_FiManTrunk)/innerdiameter(ND_FiPipe, PS_Fi))) = 0.00113436 m
# offset of the coupling trunk from inner filter body
L_FiManCapOffset := 0.5*innerdiameter(ND_FiPipe, PS_Fi) - ConRadius(ND_FiManBranch)/tan(asin(2*ConRadius(ND_FiManBranch)/innerdiameter(ND_FiPipe, PS_Fi)))
# offset of the cap branch from inner filter body
S_FiManBranchEnds := L_FiManBulkheadOffset + CouplingLength(ND_FiManTrunk) + outerdiameter(ND_FiManBranch)/2 = 0.117847 m
L_FiManTrunk := innerdiameter(ND_FiPipe, PS_Fi) - BulkheadLength(ND_FiManTrunk) + BulkheadThreadLength(ND_FiManTrunk) - CapThickness(ND_FiManTrunk) - L_FiManBulkheadOffset - L_FiManCapOffset = 0.552238 m
N_FiManBranch := 6  # number of branches on either side
S_FiManBranch := (innerdiameter(ND_FiPipe, PS_Fi) - 2*S_FiManBranchEnds)/(N_FiManBranch - 1) = 0.0678011 m
# distance from inner end of filter body to center of nearest branch
# cut coupling down
L_BranchExtend := CapHeight(ND_FiManBranch)/2
L_FiManBranch :=
    for i ∈ 0 .. N_FiManBranch - 1
        L[i] ←
            0.5*innerdiameter(ND_FiPipe, PS_Fi)*sin(acos((0.5*innerdiameter(ND_FiPipe, PS_Fi) - S_FiManBranchEnds + ConRadius(ND_FiManBranch) - S_FiManBranch*i + BulkheadLength(ND_FiManTrunk) - BulkheadThreadLength(ND_FiManTrunk))/(0.5*innerdiameter(ND_FiPipe, PS_Fi)))) - (0.5*innerdiameter(ND_FiManTrunk, PS_FiBranch) + CapThickness(ND_FiManBranch)) + L_BranchExtend if i < N_FiManBranch/2
            (0.5*innerdiameter(ND_FiPipe, PS_Fi) - innerdiameter(ND_FiManTrunk, PS_FiBranch) - L_FiManCapOffset - CapThickness(ND_FiManBranch)) + L_BranchExtend if i + 0.5 == N_FiManBranch/2
            L[N_FiManBranch - 1 - i] otherwise
    L
L_FiManBranch = [0.180471; 0.230953; 0.256916; 0.256916; 0.230953; 0.180471] m
# Slot Design
L_SlotsPipeAvail := 2*sum(L_FiManBranch - 0.75*CapHeight(ND_FiManBranch) - L_BranchExtend) = 2.07805 m
N_slots := 16/in
W_slots := 0.2 mm
L_slots := 0.9 in
A_slots := L_SlotsPipeAvail*N_slots*W_slots*L_slots = 0.00598478 m^2
D_SlotsEquivalent := sqrt(4*A_slots/π) = 0.087293 m
# Filtration Head Loss
H_FiSandFluidizedSafe := Pi_FiFluidized*H_FiSand + T_FiLayer  # add T.FiLayer for safety
K_tee90 := 1
K_bushing := 0.20
K_ballValve := 0.05
H_FiSandFluidizedSafe = 1.76 m
K_checkValve := 2.5
HL_FiOutPipe := h_l(Q_Plant, innerdiameter(ND_RMPipe, PS_Fi), H_FiSandFluidizedSafe, K_ballValve + 2*K_El90, Nu_Water, E_Pvc) + HL_Manifold(Q_Plant, innerdiameter(ND_RMPipe, PS_Fi), H_FiSandFluidizedSafe, 0, Nu_Water, 0, 3) = 1.53579 cm
HL_FiSlottedOut := HL_Manifold(Q_Plant/3, innerdiameter(ND_FiManTrunk, PS_Fi), L_FiManTrunk, K_checkValve + K_bushing, Nu_Water, 0, N_FiManBranch) + h_orifice(D_SlotsEquivalent*sqrt(ε_FiSand), Pi_VenaContractaOrifice, Q_Plant/3) = 2.27519 cm
HL_SandBed := h_lKozeny(20 cm, D_FiSand60, Q_Plant/(6*A_circle(innerdiameter(ND_FiPipe, PS_Fi))), ε_FiSand, Nu_Water) = 5.56209 cm
HL_FiSlottedIn := HL_Manifold(Q_Plant/4, innerdiameter(ND_FiManTrunk, PS_Fi), L_FiManTrunk, K_ballValve + K_bushing, Nu_Water, 0, N_FiManBranch) + h_orifice(D_SlotsEquivalent*sqrt(ε_FiSand), Pi_VenaContractaOrifice, Q_Plant/4) = 1.16281 cm
HL_FiInPipe := h_l(Q_Plant, innerdiameter(ND_RMPipe, PS_Fi), L_FiPipe, K_ballValve + 2*K_tee90 + 3*K_El90, Nu_Water, E_Pvc) + HL_Manifold(Q_Plant, innerdiameter(ND_RMPipe, PS_Fi), L_FiPipe, 0, Nu_Water, 0, N_FiManBranch) = 3.35903 cm
HL_Filtration := HL_FiOutPipe + HL_FiSlottedOut + HL_SandBed + HL_FiSlottedIn + HL_FiInPipe = 13.8949 cm
# Backwash Plumbing
ND_FiBwDrain := D_pipeschedule(Q_Fi, PS_Fi, L_FiPipe - N_FiLayer*T_FiLayer, L_FiPipe, Nu_Water, E_Pvc, 3*K_El90) = 2 in
ND_FiBwDrain := 3 in  # increase this pipe size to descrease bw headloss
L_FiBwBulkheadOffset := 0.5*innerdiameter(ND_FiPipe, PS_Fi) - BulkheadSocketOuterD(ND_FiBwDrain)*0.5/tan(asin(BulkheadSocketOuterD(ND_FiBwDrain)/innerdiameter(ND_FiPipe, PS_Fi))) = 0.00113436 m
L_FiBwMan := innerdiameter(ND_FiPipe, PS_Fi) - L_FiBwBulkheadOffset - CapThickness(ND_FiBwDrain) - BulkheadSocketDepth(ND_FiBwDrain) = 0.557027 m
L_FiBwManAvail := L_FiBwMan - 0.5*CapHeight(ND_FiBwDrain) - BulkheadSocketDepth(ND_FiBwDrain) = 0.509928 m
B_FiBwOrificesEst := 2 cm
N_FiBwOrifices := floor(L_FiBwManAvail/B_FiBwOrificesEst) + 1 = 26
N_FiBwOrifices := 36
D_FiBwOrifices := innerdiameter(ND_FiBwDrain, PS_Fi)/sqrt(N_FiBwOrifices) = 0.0129879 m
D_FiBwOrifices := 1/2*in
B_FiBwOrifices := (L_FiBwManAvail - 1.01*D_FiBwOrifices)/(N_FiBwOrifices - 1) = 0.0142029 m
L_FiBwOrificeOffsetR := BulkheadLength(ND_FiBwDrain) + 1.01*D_FiBwOrifices - BulkheadThreadLength(ND_FiBwDrain) = 2.71194 cm
# distance of first orifice from right side of manifold
# headloss analysis during backwash
HL_FiBwSand := H_FiSand*(Rho_FiSand - Rho_H2O)*(1 - ε_FiSand)/Rho_H2O = 1.188 m
HL_BwDrain := h_l(Q_Plant, innerdiameter(ND_FiBwDrain, PS_Fi), L_FiPipe, K_El90 + K_PipeExit, Nu_Water, 0) = 0.0447991 m
HL_FiBwManUpper := HL_Manifold(Q_Plant, innerdiameter(ND_FiBwDrain, PS_Fi), L_FiBwMan, 0, Nu_Water, 0, N_FiBwOrifices) = 0.000955679 m
HL_FiBwManUpperOrifice := h_orifice(D_FiBwOrifices, Pi_VenaContractaOrifice, Q_Plant/N_FiBwOrifices) = 0.0502921 m
HL_FiBwInlet := h_l(Q_Plant, innerdiameter(ND_RMPipe, PS_Fi), L_FiPipe, 3*K_El90, Nu_Water, E_Pvc) = 0.019807 m
HL_FiBwManTrunk := HL_Manifold(Q_Plant, innerdiameter(ND_FiManTrunk, PS_FiBranch), L_FiManTrunk, K_PipeEnt, Nu_Water, 0, N_FiManBranch) = 0.00499333 m
HL_SlotOrifice := h_orifice(D_SlotsEquivalent, Pi_VenaContractaOrifice, Q_Plant) = 0.0292013 m
HL_FiBwTotal := HL_FiBwSand + HL_BwDrain + HL_FiBwManUpper + HL_FiBwManUpperOrifice + HL_FiBwInlet + HL_FiBwManTrunk + HL_SlotOrifice = 1.33805 m
# Required elevations
ZW_FiOutPipe := H_FiSand + innerdiameter(ND_RMPipe, PS_Fi)/2 + (T_Flange + 1.5*ConRadius(ND_FiManTrunk))
# Z is relative to bottom of the filter (not at zero!)
ZW_FiInPipeClean := ZW_FiOutPipe + HL_Filtration = 1.47628 m
ZW_FiInPipeDirty := ZW_FiOutPipe + HL_FiDirty = 1.73733 m
Z_FiBwOutlet := ZW_FiInPipeDirty - 1.1*HL_FiBwTotal = 0.265477 m
Z_EtBottomMin := ZW_FiInPipeDirty + H_Freefall + T_PlantWall
# Low Flow Stacked Rapid Sand Filter  -- AutoCAD Drawings
# Storage Tanks
Tank1_Origin := [-L_Wall; 0 m; L_FiPipe] = [-3; 0; 2.05] m
Tank2_Origin := Tank1_Origin - [-(L_Wall + T_TankWall); 0; T_TankWall + L_TankOffset + H_Wall]
TankCoupling_Origin := [
    CouplingLength(ND_TankToRawCHT) - SocketDepth(ND_TankToRawCHT);
    outerdiameter(ND_TankToRawCHT)/2 + L_Et - 2*S_Fitting - ConRadius(ND_EtInlet) - T_TankWall + T_Et;
    H_UpperTankOutlet + ConRadius(ND_EtInlet)
] + Tank1_Origin
OutletAdapterL_Origin := [
    Tank1_Origin[0] + T_TankWall + 2*SocketDepth(ND_TankToRawCHT);
    TankCoupling_Origin[1];
    TankCoupling_Origin[2]
]
OutletValve_Origin := OutletAdapterL_Origin + [
    -SocketDepth(ND_TankToRawCHT) + MaleAdapterLength(ND_TankToRawCHT) + GateValveLength(ND_TankToRawCHT) - GateValveSocket(ND_TankToRawCHT);
    0;
    0
]
OutletAdapterR_Origin := OutletValve_Origin + [
    -SocketDepth(ND_TankToRawCHT) - GateValveSocket(ND_TankToRawCHT) + MaleAdapterLength(ND_TankToRawCHT);
    0;
    0
]
StorageTanksLyr := layer_new("StorageTanks", grey)
UpperTank := Tank(Tank1_Origin, [L_Wall; W_Wall; H_Wall], T_TankWall)
LowerTank := Tank(Tank2_Origin, [L_Wall; W_Wall; H_Wall], T_TankWall)
TankWall := BoxF(Tank1_Origin + [T_TankWall - T_Separator; -T_TankWall; -T_TankWall], Tank1_Origin + [T_TankWall; W_Wall + T_TankWall; -H_Wall], [0; 0; 0]*deg)
StorageTanksFrz := FreezeLayer("StorageTanks")
Tanks := stack(StorageTanksLyr, UpperTank, LowerTank, TankWall, StorageTanksFrz)
StorageTankOutletFittingsLyr := layer_new("TankOuletFittingsPlu", green)
OutletCoupling := CouplingSUBF(TankCoupling_Origin, [0; 0]*deg, ND_TankToRawCHT, PS_Fi, ["StorageTanks"])
OutletAdapterL := MaleAdapterF(OutletAdapterL_Origin, [180; 0]*deg, ND_TankToRawCHT, PS_Fi)
OutletAdapterR := MaleAdapterF(OutletAdapterR_Origin, [0; 0]*deg, ND_TankToRawCHT, PS_Fi)
OutletGateValve := InsertDwg(GateValveDwg, OutletValve_Origin, ND_TankToRawCHT, 0 deg)
StorageTankOutletFittingsFrz := FreezeLayer("TankOuletFittingsPlu")
UpperOutletFittings := stack(StorageTankOutletFittingsLyr, OutletCoupling, OutletAdapterL, OutletAdapterR, OutletGateValve, StorageTankOutletFittingsFrz)
StorageTankOutletPluLyr := layer_new("TankOuletPlu", blue)
OutletPipe := PipeSUBF(OutletAdapterL_Origin, max(2*SocketDepth(ND_TankToRawCHT), T_TankWall - CouplingLength(ND_TankToRawCHT) + 3*SocketDepth(ND_TankToRawCHT)), [0; 0; 0]*deg, ND_TankToRawCHT, PS_Fi, ["StorageTanks"])
StorageTankOutletPluFrz := FreezeLayer("TankOuletPlu")
UpperOutletPlu := stack(StorageTankOutletPluLyr, OutletPipe, StorageTankOutletPluFrz)
ND_FiCleanOutlet := 2 in
CleanOutletCoupling_Origin := [-1.1*ConRadius(ND_FiCleanOutlet); -SocketDepth(ND_FiCleanOutlet); H_Wall - H_FiSand + H_Bucket5Gal] + Tank2_Origin
CleanOutletElbow_Origin
CleanOutletElbow_Origin := CleanOutletCoupling_Origin + [
    0;
    -max(T_TankWall, CouplingLength(ND_FiCleanOutlet)) - ElbowRadius(ND_FiCleanOutlet);
    -ElbowRadius(ND_FiCleanOutlet)
]
CleanOutletValve_Origin := CleanOutletElbow_Origin + [0; 0; -SocketDepth(ND_FiCleanOutlet) - BallValveSocket(ND_FiCleanOutlet)]
FiCleanOutletFittingsLyr := layer_new("FiCleanOutletFittings", green)
FiCleanOutletValve := InsertDwg(BallValveDwg, [CleanOutletValve_Origin[0]; CleanOutletValve_Origin[2]; -CleanOutletValve_Origin[1]], ND_FiCleanOutlet, 90 deg)
FiCleanOutletCoupling := CouplingSUBF(CleanOutletCoupling_Origin, [90; 0]*deg, ND_FiCleanOutlet, PS_Fi, ["StorageTanks"])
FiCleanOutletElbow := ElbowF(CleanOutletElbow_Origin, [270; 270; 0]*deg, ND_FiCleanOutlet, PS_Fi)
FiCleanOutletFittingsFrz := FreezeLayer("FiCleanOutletFittings")
FiCleanOutletFittings := stack(FiCleanOutletFittingsLyr, view("f"), FiCleanOutletValve, view("t"), FiCleanOutletCoupling, FiCleanOutletElbow, FiCleanOutletFittingsFrz)
FiCleanOutletPipeLyr := layer_new("FiCleanOutletPlu", blue)
FiCleanOutletPipe := PipeSUBF(CleanOutletCoupling_Origin + [0; -CouplingLength(ND_FiCleanOutlet) + 2*SocketDepth(ND_FiCleanOutlet); 0], 2*SocketDepth(ND_FiCleanOutlet) + max(0, T_TankWall - CouplingLength(ND_FiCleanOutlet)), [90; 0]*deg, ND_FiCleanOutlet, PS_Fi, ["StorageTanks"])
FiCleanOutletPipeFrz := FreezeLayer("FiCleanOutletPlu")
FiCleanOutletPlu := stack(FiCleanOutletPipeLyr, FiCleanOutletPipe, FiCleanOutletPipeFrz)
FiCleanOutlet := stack(FiCleanOutletFittings, FiCleanOutletPlu)
TanksToEt := stack(Tanks, UpperOutletFittings, UpperOutletPlu, FiCleanOutlet)
# Entrance Tank
Et_Origin := [
    T_TankWall + T_Et + W_Et;
    T_Et - T_TankWall;
    -(H_FloatOutlet + H_Et) + H_Freeboard + H_UpperTankOutlet + ConRadius(ND_EtInlet)
] + Tank1_Origin
EtLayer := layer_new("FlowMeteringTank", grey)
EtTank := Tank(Et_Origin, [W_Et; L_Et; H_Et], T_Et)
EtFrz := FreezeLayer("FlowMeteringTank")
EtBaffleLayer := layer_new("Baffle", purple)
Baffle := BoxSUBF([S_Fitting; L_Et - 2*S_Fitting - 2*ConRadius(ND_EtInlet); 0.15*H_Et] + Et_Origin, [-S_Fitting - W_Et; L_Et - 2*S_Fitting - 2*ConRadius(ND_EtInlet) - T_EtBaffle; H_Et] + Et_Origin, [0; 0; 0]*deg, ["FlowMeteringTank"])
EtBaffleFrz := FreezeLayer("Baffle")
ND_EtDrain := D_pipeschedule(Q_Fi, PS_Fi, L_FiPipe, L_FiPipe, Nu_Water, E_Pvc, 3*K_El90) = 1.5 in
EtDrainCoupling1_Origin := [-W_Et + 1.1*ConRadius(ND_EtDrain); 1.1*ConRadius(ND_EtDrain); -SocketDepth(ND_EtDrain)] + Et_Origin
EtDrainElbow1_Origin := [
    EtDrainCoupling1_Origin[0];
    EtDrainCoupling1_Origin[1] - ElbowRadius(ND_EtDrain);
    Tank2_Origin[2] + H_Wall + ConRadius(ND_EtDrain)
]
EtDrainElbow2_Origin := [EtDrainElbow1_Origin[0]; Tank2_Origin[1] - T_TankWall; EtDrainElbow1_Origin[2]]
EtDrainElbow3_Origin := EtDrainElbow2_Origin + [
    0;
    -2*ElbowRadius(ND_EtDrain);
    -H_FiSand - 2*ElbowRadius(ND_EtDrain) - 1.5*T_Platform - 2*SocketDepth(ND_EtDrain) - T_Flange - T_FiCap
]
EtDrainCoupling2_Origin := [
    EtDrainElbow3_Origin[0];
    -1.2*ConRadius(ND_FiPipe) + ConRadius(ND_RMPipe) - SocketDepth(ND_EtDrain) + CouplingLength(ND_EtDrain) + Tank2_Origin[1] - T_TankWall;
    EtDrainElbow3_Origin[2]
] = [-2.56857; -0.525864; -0.99425] m
EtDrainFittingLyr := layer_new("EtDrainFittings", green)
EtDrainCoupling := CouplingSUBF(EtDrainCoupling1_Origin, [0; 270]*deg, ND_EtDrain, PS_Fi, ["FlowMeteringTank"])
EtDrainElbow1 := ElbowF(EtDrainElbow1_Origin, [0; 90; 0]*deg, ND_EtDrain, PS_Fi)
EtDrainElbow2 := ElbowF(EtDrainElbow2_Origin, [180; 90; 0]*deg, ND_EtDrain, PS_Fi)
EtDrainElbow3 := ElbowF(EtDrainElbow3_Origin, [0; 90; 0]*deg, ND_EtDrain, PS_Fi)
EtDrainCoupling2 := CouplingF(EtDrainCoupling2_Origin, [90; 0]*deg, ND_EtDrain, PS_Fi)
EtDrainFittingFrz := FreezeLayer("EtDrainFittings")
EtDrainFittings := stack(EtDrainFittingLyr, EtDrainCoupling, EtDrainElbow1, EtDrainElbow2, EtDrainElbow3, EtDrainCoupling2, EtDrainFittingFrz)
EtDrainPipeLyr := layer_new("EtDrainPipe", blue)
EtDrainStopper := PipeF(EtDrainCoupling1_Origin, H_Et, [0; 90]*deg, ND_EtDrain, PS_Fi)
L_EtDrainVertUpper := EtDrainCoupling1_Origin[2] - EtDrainElbow1_Origin[2] - CouplingLength(ND_EtDrain) + 2*SocketDepth(ND_EtDrain) - ElbowRadius(ND_EtDrain)
EtDrainPipeVertUpper := PipeSUBF(EtDrainElbow1_Origin + [0; ElbowRadius(ND_EtDrain); ElbowRadius(ND_EtDrain)], L_EtDrainVertUpper, [0; 90]*deg, ND_EtDrain, PS_Fi, ["StorageTanks"])
L_EtDrainHorizUpper := EtDrainElbow1_Origin[1] - EtDrainElbow2_Origin[1]
EtDrainPipeHorizUpper := PipeF(EtDrainElbow1_Origin, L_EtDrainHorizUpper, [90; 0]*deg, ND_EtDrain, PS_Fi)
L_EtDrainVertLower := EtDrainElbow2_Origin[2] - EtDrainElbow3_Origin[2] - 2*ElbowRadius(ND_EtDrain)
EtDrainPipeVertLower := PipeF(EtDrainElbow3_Origin + [0; ElbowRadius(ND_EtDrain); ElbowRadius(ND_EtDrain)], L_EtDrainVertLower, [0; 90]*deg, ND_EtDrain, PS_Fi)
L_EtDrainHorizBottom := EtDrainElbow3_Origin[1] - EtDrainCoupling2_Origin[1]
EtDrainPipeHorizBottom := PipeF(EtDrainElbow3_Origin, L_EtDrainHorizBottom, [90; 0]*deg, ND_EtDrain, PS_Fi)
EtDrainPipeFrz := FreezeLayer("EtDrainPipe")
EtDrainPipe := stack(EtDrainPipeLyr, EtDrainStopper, EtDrainPipeVertUpper, EtDrainPipeVertLower, EtDrainPipeHorizUpper, EtDrainPipeVertLower, EtDrainPipeHorizBottom, EtDrainPipeFrz)
EtDrain := stack(EtDrainFittings, EtDrainPipe)
EntranceTankScript := stack(EtLayer, EtTank, EtFrz, EtBaffleLayer, Baffle, EtBaffleFrz, EtDrain)
# Filter Body
L_TeeDistance := 0.6 m  # remember to correct this! - set as distance from filter the inlet tee is
FiPipe_Origin := [
    Tank1_Origin[0] + T_TankWall + T_Et + W_Et + ConRadius(ND_FiPipe) + L_TeeDistance + TeeLength(ND_RMPipe) + 2*SocketDepth(ND_RMPipe) - ConRadius(ND_RMPipe) - S_Fitting;
    -1.2*ConRadius(ND_FiPipe) - T_TankWall;
    Tank2_Origin[2] + H_Wall - (T_FiFlange + 1.5*ConRadius(ND_FiManTrunk) + 5*T_FiLayer + ShortTeeLength(ND_RMPipe) + 2*SocketDepth(ND_RMPipe) + ElbowRadius(ND_RMPipe) - 1.1*ConRadius(ND_RMPipe)) + T_FiCap
]
FiManBulkhead_Origin := [
    L_FiManBulkheadOffset - innerdiameter(ND_FiPipe, PS_Fi)/2;
    0;
    T_Flange + 1.5*ConRadius(ND_FiManTrunk)
] + FiPipe_Origin = [-1.15771; -0.63039; -0.690452] m
FiManInletPipe_Origin := [L_FiManTrunk; 0 m; 0] + FiManBulkhead_Origin
FiBranch_Origin(i) := [
    FiPipe_Origin[0] + innerdiameter(ND_FiPipe, PS_Fi)/2 - S_FiManBranchEnds - S_FiManBranch*i;
    FiPipe_Origin[1] + innerdiameter(ND_FiManTrunk, PS_FiBranch)/2 - L_BranchExtend;
    FiManInletPipe_Origin[2]
]
LayerFiBody := layer_new("FiBodyPlu", blue3)
DrawFiBody := PipeF(FiPipe_Origin, L_FiPipe, [0; 90]*deg, ND_FiPipe, PS_FiBranch)
FreezeFiBody := FreezeLayer("FiBodyPlu")
FiBodyOrificeInlet := CylinderF(FiManBulkhead_Origin + [zc; 0; 0], outerdiameter(ND_FiManTrunk)/2, CouplingLength(ND_FiManTrunk), [0; 0]*deg)
ArrayInletOrifice := ArrayLast(N_FiLayer/2 + 1, 1, T_FiLayer*2)
FiBodyOrificeOutlet := CylinderF([
    FiPipe_Origin[0] + ConRadius(ND_FiPipe) + CouplingLength(ND_FiManTrunk)/2;
    FiManBulkhead_Origin[1];
    T_FiLayer + FiManBulkhead_Origin[2]
], outerdiameter(ND_FiManTrunk)/2, CouplingLength(ND_FiManTrunk), [0; 0]*deg)
ArrayOutletOrifice := ArrayLast(N_FiLayer/2, 1, T_FiLayer*2)
# GroupDelete
SubtractFiInletsOutlets := SubtractF(["FiBodyPlu"], "DeleteMe")
FiBodyPipe := stack(LayerFiBody, DrawFiBody, FreezeFiBody, FiBodyOrificeInlet, view("f"), ArrayInletOrifice, view("t"), FiBodyOrificeOutlet, view("f"), ArrayOutletOrifice, view("t"), GroupDelete, SubtractFiInletsOutlets)
# Internal Filter Piping
# origins in "Filter Body" section
FiManTrunkLyr := layer_new("FiManTrunkPlu", blue3)
FiManTrunk := PipeF(FiManInletPipe_Origin, L_FiManTrunk, [0; 0]*deg, ND_FiManTrunk, PS_FiBranch)
FiManTrunkFrz := FreezeLayer("FiManTrunkPlu")
D_BranchSlotOrifice := 0.96*outerdiameter(ND_FiManBranch) = 0.032065 m
D_BranchSlotOrifice*10 = 0.32065 m
FiManTrunkOrifice := CylinderF(FiBranch_Origin(0) + [0; 1.5*ConRadius(ND_FiManTrunk); 0], D_BranchSlotOrifice/2, 3*ConRadius(ND_FiManTrunk), [90; 0]*deg)
ArrayTrunkOrifice := ArrayLast(1, N_FiManBranch, -S_FiManBranch)
# GroupDelete
SubtractFiOrifices := SubtractF(["FiManTrunkPlu"], "DeleteMe")
FiManPlu :=
    Local ← layer_new("FiManBranchPlu", blue3)
    for i ∈ 0 .. N_FiManBranch - 1
        Local ← stack(Local, PipeF(FiBranch_Origin(i), L_FiManBranch[i], [270; 0]*deg, ND_FiManBranch, PS_FiBranch))
    Local
FiManFreeze := FreezeLayer("FiMan*Plu")
DrawFiManPipes := stack(FiManTrunkLyr, FiManTrunk, FiManTrunkFrz, FiManTrunkOrifice, ArrayTrunkOrifice, GroupDelete, SubtractFiOrifices, FiManPlu, FiManFreeze)
FiManBranchCaps :=
    Local ← layer_new("FiManCapsPlu", red)
    for i ∈ 0 .. N_FiManBranch - 1
        Local ← stack(Local, CutCapF(FiBranch_Origin(i) + [0; L_FiManBranch[i]; 0], H_FiManCap, [90; 0]*deg, ND_FiManBranch))
    Local
FiManTrunkCap := CapF(FiManInletPipe_Origin, [0; 0]*deg, ND_FiManTrunk)
FiManCapFrz := FreezeLayer("FiManCapsPlu")
ThawFiManPlu := ThawMultiple(["FiManBranchPlu"; "FiManCapsPlu"])
MirrorFiMan := MirrorAll([FiPipe_Origin[0]; FiPipe_Origin[1]], [FiPipe_Origin[0] + zc; FiPipe_Origin[1]], "n")
FiManPluFrz := FreezeMultiple(["FiMan*"])
FiManBulkheadLyr := layer_new("FiManBulkheadPlu", green)
FiManBulkhead := InsertDwg(BulkheadDwg, FiManBulkhead_Origin, ND_FiManTrunk, 180 deg)
FiManBulkheadFrz := FreezeLayer("FiManBulkheadPlu")
DrawFiManFittings := stack(FiManBranchCaps, FiManTrunkCap, FiManCapFrz, ThawFiManPlu, MirrorFiMan, FiManPluFrz, FiManBulkheadLyr, FiManBulkhead, FiManBulkheadFrz)
MirrorFiManSet :=
    Local ← stack(ThawMultiple(["FiMan*"]), view("f"), array_all(N_FiLayer + 1, 1, T_FiLayer), view("f"))
    for i ∈ 0 .. N_FiLayer/2 - 1
        ManWin[i, 0] ← [
            -ConRadius(ND_FiPipe) + FiPipe_Origin[0] - BulkheadLength(ND_FiManTrunk);
            T_FiLayer*(2*i + 1) - 0.5*T_FiLayer + FiManInletPipe_Origin[2];
            0
        ]
        ManWin[i, 1] ← [
            ConRadius(ND_FiPipe) + FiPipe_Origin[0];
            T_FiLayer*(2*i + 1) + 0.5*T_FiLayer + FiManInletPipe_Origin[2];
            0
        ]
    SelectMans ← SelectWindow(ManWin)
    MirrorMans ← MirrorSelection([FiPipe_Origin[0]; FiPipe_Origin[2]], [FiPipe_Origin[0]; FiPipe_Origin[2] + zc], "y")
    Local ← stack(Local, SelectMans, MirrorMans)
    Local
FrzFiMan := FreezeMultiple(["FiMan*"])
ArrayFiManifolds := stack(MirrorFiManSet, view("t"), FrzFiMan)
# Bed Tester
ND_FiTesterOuter := 1.5 in
ND_FiTesterInner := 1 in
L_FiTesterReducer := SocketDepth(ND_FiTesterInner)
L_FiTesterBulkheadOffset := 0.5*innerdiameter(ND_FiPipe, PS_Fi) - BulkheadSocketOuterD(ND_FiTesterOuter)*0.5/tan(asin(BulkheadSocketOuterD(ND_FiTesterOuter)/innerdiameter(ND_FiPipe, PS_Fi))) = 0.000333823 m
L_FiTesterInnerCapOffset := innerdiameter(ND_FiPipe, PS_Fi) - ConRadius(ND_FiTesterInner)/tan(asin(ConRadius(ND_FiTesterInner)/innerdiameter(ND_FiPipe, PS_Fi))) = 0.000342693 m
L_FiTesterOuter := 2*SocketDepth(ND_FiTesterOuter)
L_FiTesterInner := innerdiameter(ND_FiPipe, PS_Fi) - L_FiTesterInnerCapOffset - CapThickness(ND_FiTesterInner) + CouplingLength(ND_FiTesterOuter) + L_FiTesterReducer + CapHeight(ND_FiTesterOuter) + SocketDepth(ND_FiTesterOuter) + SocketDepth(ND_FiTesterInner)
# Draw the tester along the x-axis and then rotate it 30 deg.
FiTesterBulkhead_Origin := FiManBulkhead_Origin + [-L_FiManBulkheadOffset + L_FiTesterBulkheadOffset; 0; T_FiLayer/2]
FiTesterFemaleAdapter_Origin := FiTesterBulkhead_Origin + [-BulkheadThreadLength(ND_FiTesterOuter); 0; 0] = [-1.21167; -0.63039; -0.590452] m
FiTesterReducer_Origin := FiTesterFemaleAdapter_Origin + [-CouplingLength(ND_FiTesterOuter); 0; 0] = [-1.2839; -0.63039; -0.590452] m
FiTesterInnerCapL_Origin := FiTesterReducer_Origin + [
    SocketDepth(ND_FiTesterOuter) - L_FiTesterReducer - CapHeight(ND_FiTesterInner) + CapThickness(ND_FiTesterInner) - SocketDepth(ND_FiTesterInner) - SocketDepth(ND_FiTesterOuter);
    0;
    0
]
FiTesterInner_Origin := FiTesterInnerCapL_Origin + [L_FiTesterInner; 0; 0]
FiTesterOuter_Origin := [-CouplingLength(ND_FiTesterOuter) + 2*SocketDepth(ND_FiTesterOuter); 0; 0] + FiTesterFemaleAdapter_Origin
FiTesterLyr := layer_new("FiTesterPlu", blue)
FiTesterOuterPipe := PipeF(FiTesterOuter_Origin, L_FiTesterOuter, [0; 0], ND_FiTesterOuter, PS_Fi)
FiTesterInnerPipe := PipeF(FiTesterInner_Origin, L_FiTesterInner, [0; 0], ND_FiTesterInner, PS_Fi)
FiTesterFrz := FreezeLayer("FiTesterPlu")
FiTesterFitLyr := layer_new("FiTesterFittingsPlu", green)
FiTesterBulkhead := InsertDwg(BulkheadDwg, FiTesterBulkhead_Origin, ND_FiTesterOuter, 180 deg)
FiTesterFemaleAdapter := CouplingF(FiTesterFemaleAdapter_Origin, [0; 0]*deg, ND_FiTesterOuter, PS_Fi)
FiTesterReducer := reducerF(FiTesterReducer_Origin, [0; 0; 0]*deg, ND_FiTesterOuter, ND_FiTesterInner, L_FiTesterReducer, PS_Fi)
FiTesterCapR := CapF(FiTesterInner_Origin, [0; 0]*deg, ND_FiTesterInner)
FiTesterCapL := CapF(FiTesterInnerCapL_Origin, [180; 0]*deg, ND_FiTesterInner)
FiTesterFitFrz := FreezeLayer("FiTesterFittingsPlu")
AN_FiTester := 130 deg
FiTesterScript := stack(FiTesterLyr, FiTesterOuterPipe, FiTesterInnerPipe, FiTesterFrz, FiTesterFitLyr, FiTesterBulkhead, FiTesterFemaleAdapter, FiTesterReducer, FiTesterCapR, FiTesterCapL, FiTesterFitFrz, ThawMultiple(["FiTester*"]), Rotate_All([FiPipe_Origin[0]; FiPipe_Origin[1]], AN_FiTester), FreezeMultiple(["FiTester*"]))
# Filter Caps
ND_FiCapValve := 3 in
FiCapBulkhead_Origin := [0; 0; L_FiPipe + T_FiFlange] + FiPipe_Origin
FiCapValve_Origin := FiCapBulkhead_Origin + [0; 0; BulkheadThreadLength(ND_FiCapValve)]
AluminumFlangeLyr := layer_new("AluminumFlange", grey)
TopFlange := CylinderF([0; 0; L_FiPipe] + FiPipe_Origin, outerdiameter(ND_FiPipe)/2 + T_FiFlangeLip, T_FiFlange, [0; 90]*deg)
BottomFlange := CylinderF([0; 0; -T_FiFlange] + FiPipe_Origin, outerdiameter(ND_FiPipe)/2 + T_FiFlangeLip, T_FiFlange, [0; 90]*deg)
AluminumFlangeFrz := FreezeLayer("AluminumFlange")
TopFlangeSubtract := CylinderF([0; 0; L_FiPipe] + FiPipe_Origin, outerdiameter(ND_FiPipe)/2 - T_FiFlangeLip, T_FiFlange, [0; 90]*deg)
BottomFlangeSubtract := CylinderF([0; 0; -T_FiFlange] + FiPipe_Origin, outerdiameter(ND_FiPipe)/2 - T_FiFlangeLip, T_FiFlange, [0; 90]*deg)
SubtractFlange := SubtractF(["AluminumFlange"], "DeleteMe")
AluminumFlange := stack(AluminumFlangeLyr, TopFlange, BottomFlange, AluminumFlangeFrz, TopFlangeSubtract, BottomFlangeSubtract, GroupDelete, SubtractFlange)
FiCapLyr := layer_new("FiCap", grey)
TopCap := CylinderF([0; 0; L_FiPipe + T_FiFlange] + FiPipe_Origin, outerdiameter(ND_FiPipe)/2 + T_FiFlangeLip, T_FiFlange, [0; 90]*deg)
BottomCap := CylinderF([0; 0; -T_FiFlange - T_FiCap] + FiPipe_Origin, outerdiameter(ND_FiPipe)/2 + T_FiFlangeLip, T_FiFlange, [0; 90]*deg)
FiCapFrz := FreezeLayer("FiCap")
ValveAccessOrifice := CylinderF([0; 0; L_FiPipe + T_FiFlange] + FiPipe_Origin, innerdiameter(ND_FiCapValve, PS_Fi)/2, T_FiFlange, [0; 90]*deg)
SubtractValveAccess := SubtractF(["FiCap"], "DeleteMe")
FiCaps := stack(FiCapLyr, TopCap, BottomCap, FiCapFrz, ValveAccessOrifice, GroupDelete, SubtractValveAccess)
S_BoltsEst := 7 in
R_Bolt := 1/2*in
L_FiBolt := (T_FiCap + T_FiFlange)*1.1
N_Bolts := ceil(2*π*(outerdiameter(ND_FiPipe)*0.5 + 2*R_Bolt)/S_BoltsEst) = 12
N_ThreadedRods := N_Bolts/2
S_Bolts := π*innerdiameter(ND_FiPipe, PS_Fi)/N_Bolts = 0.150456 m
AN_BoltArray := 360 deg
FiCapBoltLyr := layer_new("FiCapBolt", red)
FiCapBolt := CylinderF([0.5*outerdiameter(ND_FiPipe) + 2*R_Bolt; 0; L_FiPipe - 0.05*(T_FiCap + T_FiFlange)] + FiPipe_Origin, R_Bolt, L_FiBolt, [0; 90]*deg)
ArrayFiBolt := ArrayLastPolar([FiPipe_Origin[0]; FiPipe_Origin[1]], N_Bolts, AN_BoltArray)
FiCapBoltFrz := FreezeLayer("FiCapBolt")
FiBolts := stack(FiCapBoltLyr, FiCapBolt, ArrayFiBolt, view("f"), array_all(2, 1, -(L_FiPipe + 2*T_FiFlange)), view("t"), FiCapBoltFrz)
FiThreadedRodsLyr := layer_new("FiThreadedRods", grey)
FiThreadedRod := CylinderF([0; -(0.5*outerdiameter(ND_FiPipe) + 2*R_Bolt); -1.05*(T_FiCap + T_FiFlange)] + FiPipe_Origin, R_Bolt, L_FiPipe + 2.1*(T_FiCap + T_FiFlange), [0; 90; 0]*deg)
ArrayFiThreadedRod := ArrayLastPolar([FiPipe_Origin[0]; FiPipe_Origin[1]], N_ThreadedRods, AN_BoltArray)
FiThreadedRodFrz := FreezeLayer("FiThreadedRods")
FiThreadedRods := stack(FiThreadedRodsLyr, FiThreadedRod, ArrayFiThreadedRod, FiThreadedRodFrz)
FiCapFittingsLyr := layer_new("FiCapAccess", green)
FiCapBulkhead := InsertDwg(BulkheadDwg, [FiCapBulkhead_Origin[0]; FiCapBulkhead_Origin[2]; (-FiCapBulkhead_Origin)[1]], ND_FiCapValve, 90 deg)
FiCapValve := InsertDwg(BallValveDwg, [FiCapValve_Origin[0]; FiCapValve_Origin[2]; (-FiCapValve_Origin)[1]], ND_FiCapValve, 270 deg)
FiCapFittingsFrz := FreezeLayer("FiCapAccess")
FiCapAccess := stack(FiCapFittingsLyr, view("f"), FiCapBulkhead, FiCapValve, view("t"), FiCapFittingsFrz)
FiCapsScript := stack(AluminumFlange, FiCaps, FiBolts, FiCapAccess)
# Sand Drain
ND_FiSandDrain := 1 in
L_FiSandBulkheadOffset := 0.5*innerdiameter(ND_FiPipe, PS_Fi) - BulkheadSocketOuterD(ND_FiSandDrain)*0.5/tan(asin(BulkheadSocketOuterD(ND_FiSandDrain)/innerdiameter(ND_FiPipe, PS_Fi))) = 0.000159856 m
FiSandDrainVPipeInt_Origin := [
    -innerdiameter(ND_FiPipe, PS_Fi)/2 + SocketDepth(ND_FiSandDrain) + ElbowRadius(ND_FiSandDrain) + BulkheadSocketDepth(ND_FiSandDrain) + L_FiSandBulkheadOffset + FiPipe_Origin[0];
    -(1.1*ConRadius(ND_FiManTrunk)) + FiPipe_Origin[1] - ConRadius(ND_FiSandDrain);
    FiManBulkhead_Origin[2] + SocketDepth(ND_FiSandDrain) - ElbowRadius(ND_FiSandDrain)
]
L_FiSandDrainVPipeInt := H_Bucket5Gal - ElbowRadius(ND_FiSandDrain) = 0.4619 m
FiSandDrainElbowInt_Origin := FiSandDrainVPipeInt_Origin + [0; 0; L_FiSandDrainVPipeInt]
FiSandDrainPipeH_Origin := FiSandDrainElbowInt_Origin + [-ElbowRadius(ND_FiSandDrain); 0; ElbowRadius(ND_FiSandDrain)]
FiSandDrainBulkhead_Origin := [
    FiManBulkhead_Origin[0] + L_FiManBulkheadOffset - L_FiSandBulkheadOffset;
    FiSandDrainPipeH_Origin[1];
    FiSandDrainPipeH_Origin[2]
]
L_FiSandDrainPipeH := BulkheadSocketDepth(ND_FiSandDrain) + SocketDepth(ND_FiSandDrain)
FiSandDrainFemaleAdapter_Origin := FiSandDrainBulkhead_Origin + [-BulkheadThreadLength(ND_FiSandDrain); 0; 0]
FiSandDrainElbowExt_Origin := FiSandDrainFemaleAdapter_Origin + [-CouplingLength(ND_FiSandDrain) - ElbowRadius(ND_FiSandDrain); 0; -ElbowRadius(ND_FiSandDrain)]
FiSandDrainValve_Origin := [
    FiSandDrainElbowExt_Origin[0];
    FiSandDrainElbowExt_Origin[1];
    -SocketDepth(ND_FiSandDrain) - BallValveSocket(ND_FiSandDrain) + FiSandDrainElbowExt_Origin[2]
]
FiSandDrainPipeVExt_Origin := FiSandDrainValve_Origin + [0; 0; -BallValveLength(ND_FiSandDrain) + 2*BallValveSocket(ND_FiSandDrain)]
L_SandSettle := 10 cm
FiSandDrainPluLyr := layer_new("FiSandDrainPlu", blue)
FiSandDrainPipeVInt := PipeF(FiSandDrainVPipeInt_Origin, L_FiSandDrainVPipeInt, [0; 90]*deg, ND_FiSandDrain, PS_Fi)
FiSandDrainPipeH := PipeF(FiSandDrainPipeH_Origin, L_FiSandDrainPipeH, [0; 0]*deg, ND_FiSandDrain, PS_Fi)
FiSandDrainPipeExt := PipeF(FiSandDrainPipeVExt_Origin, L_SandSettle + BallValveSocket(ND_FiSandDrain), [0; 270]*deg, ND_FiSandDrain, PS_Fi)
FiSandDrainPluFrz := FreezeLayer("FiSandDrainPlu")
FiSandDrainPlu := stack(FiSandDrainPluLyr, FiSandDrainPipeVInt, FiSandDrainPipeH, FiSandDrainPipeExt, FiSandDrainPluFrz)
FiSandDrainFitLyr := layer_new("FiSandDrainFittings", green)
FiSandDrainBulkhead := InsertDwg(BulkheadDwg, FiSandDrainBulkhead_Origin, ND_FiSandDrain, 180 deg)
FiSandDrainFemaleAdapter := CouplingF(FiSandDrainFemaleAdapter_Origin, [0; 0]*deg, ND_FiSandDrain, PS_Fi)
FiSandDrainElbowInt := ElbowF(FiSandDrainElbowInt_Origin, [0; 0; 90]*deg, ND_FiSandDrain, PS_Fi)
FiSandDrainElbowExt := ElbowF(FiSandDrainElbowExt_Origin, [180; 0; 270]*deg, ND_FiSandDrain, PS_Fi)
FiSandDrainValve := InsertDwg(BallValveDwg, [FiSandDrainValve_Origin[0]; FiSandDrainValve_Origin[2]; -FiSandDrainValve_Origin[1]], ND_FiSandDrain, 90 deg)
FiSandDrainFitFrz := FreezeLayer("FiSandDrainFittings")
FiSandDrainFit := stack(FiSandDrainFitLyr, view("f"), FiSandDrainValve, view("t"), FiSandDrainBulkhead, FiSandDrainFemaleAdapter, FiSandDrainElbowInt, FiSandDrainElbowExt, FiSandDrainFitFrz)
AN_FiSandDrain := 15 deg
FiSandDrainScript := stack(FiSandDrainPlu, FiSandDrainFit, ThawMultiple(["*SandDrain*"]), Rotate_All([FiSandDrainVPipeInt_Origin[0]; FiSandDrainVPipeInt_Origin[1]], AN_FiSandDrain), FreezeMultiple(["*SandDrain*"]))
# Backwash Piping
ND_FiAirValve := 1 in
FiBwBulkhead_Origin := [
    innerdiameter(ND_FiPipe, PS_Fi)/2 - L_FiBwBulkheadOffset;
    0;
    L_FiPipe - T_Flange - 1.25*ConRadius(ND_FiBwDrain)
] + FiPipe_Origin = [-0.585273; -0.63039; 1.19985] m
FiBwFemaleAdapter_Origin := FiBwBulkhead_Origin + [BulkheadThreadLength(ND_FiBwDrain); 0; 0]
FiBwTee_Origin := FiBwFemaleAdapter_Origin + [2*SocketDepth(ND_FiBwDrain); 0; 0]
L_FiBwPipeVert := L_FiPipe - 0.75*H_Bucket5Gal + T_Flange + T_FiCap
FiBwReducer_Origin := FiBwTee_Origin + [ShortTeeLength(ND_FiBwDrain); 0; ShortTeeLength(ND_FiBwDrain) + 2*SocketDepth(ND_FiBwDrain)]
FiBwAirValve_Origin := FiBwReducer_Origin + [0; 0; SocketDepth(ND_FiBwDrain) + BallValveSocket(ND_FiAirValve) + SocketDepth(ND_FiAirValve)]
FiBwVertValve_Origin := FiBwTee_Origin + [
    ShortTeeLength(ND_FiBwDrain);
    0;
    -SocketDepth(ND_FiBwDrain) - L_FiBwPipeVert - ShortTeeLength(ND_FiBwDrain)
]
FiBwDrainLyr := layer_new("FiBwDrainPlu", blue3)
FiBwMan := PipeF(FiBwBulkhead_Origin, L_FiBwMan, [0; 0]*deg, ND_FiBwDrain, PS_Fi)
FiBwDrainFrz := FreezeLayer("FiBwDrainPlu")
FiBwManOrifice := CylinderF(FiBwBulkhead_Origin - [L_FiBwOrificeOffsetR; 0; 0], D_FiBwOrifices/2, 1.1*ConRadius(ND_FiBwDrain), [0; 270]*deg)
ArrayFiBwManOrifices := ArrayLast(1, N_FiBwOrifices, -B_FiBwOrifices)
GroupDelete
SubtractFiBwManOrifices := SubtractF(["FiBwDrainPlu"], "DeleteMe")
SelectBwDrain := SelectLayer("FiBwDrainPlu")
FiBwNipple := PipeF(FiBwTee_Origin, 2*SocketDepth(ND_FiBwDrain), [0; 0]*deg, ND_FiBwDrain, PS_Fi)
FiBwPipeVert1 := PipeF(FiBwTee_Origin + [ShortTeeLength(ND_FiBwDrain); 0; -ShortTeeLength(ND_FiBwDrain)], L_FiBwPipeVert, [0; 270]*deg, ND_FiBwDrain, PS_Fi)
FiBwDrainPlu := stack(FiBwDrainLyr, FiBwMan, FiBwDrainFrz, FiBwManOrifice, ArrayFiBwManOrifices, GroupDelete, SubtractFiBwManOrifices, SelectBwDrain, FiBwNipple, FiBwPipeVert1, FiBwDrainFrz)
FiBwDrainFittingsLyr := layer_new("FiBwDrainFittingsPlu", green)
FiBwManBulkhead := InsertDwg(BulkheadDwg, FiBwBulkhead_Origin, ND_FiBwDrain, 0 deg)
FiBwFemaleAdapter := CouplingF(FiBwFemaleAdapter_Origin, [0; 0; 90]*deg, ND_FiBwDrain, PS_Fi)
FiBwTee := TeeF(FiBwTee_Origin, [90; 0; 90]*deg, ND_FiBwDrain, PS_Fi)
FiOutletReducer := reducerF(FiBwReducer_Origin, [0; 90; 0]*deg, ND_FiBwDrain, ND_FiAirValve, SocketDepth(ND_FiManTrunk), PS_Fi)
FiBwAirValve := InsertDwg(BallValveDwg, [FiBwAirValve_Origin[1]; FiBwAirValve_Origin[2]; FiBwAirValve_Origin[0]], ND_FiAirValve, 270 deg)
FiBwVertValve := InsertDwg(BallValveDwg, [FiBwVertValve_Origin[1]; FiBwVertValve_Origin[2]; FiBwVertValve_Origin[0]], ND_FiBwDrain, 270 deg)
FiBwManCap := CapF(FiBwBulkhead_Origin - [L_FiBwMan; 0; 0], [180; 0]*deg, ND_FiBwDrain)
SubtractFiBwManCapOrifices := SubtractF(["FiBwDrainFittingsPlu"], "DeleteMe")
SelectFiBwDrainFittings := SelectLayer("FiBwDrainFittingsPlu")
FiBwDrainFittingsFrz := FreezeLayer("FiBwDrainFittingsPlu")
FiBwDrainFittings := stack(FiBwDrainFittingsLyr, FiOutletReducer, FiBwManCap, FiBwDrainFittingsFrz, FiBwManOrifice, ArrayFiBwManOrifices, GroupDelete, SubtractFiBwManCapOrifices, SelectFiBwDrainFittings, FiBwManBulkhead, FiBwFemaleAdapter, FiBwTee, view("r"), FiBwAirValve, FiBwVertValve, view("t"), FiBwDrainFittingsFrz)
AN_FiBw := 330 deg
Y_FiBwDrainPipeOffset := (FiBwTee_Origin[0] + ShortTeeLength(ND_RMPipe) - FiPipe_Origin[0])*1/sqrt(3)
X_FiBwDrainPipeOffset := (FiBwTee_Origin[0] + ShortTeeLength(ND_RMPipe) - FiPipe_Origin[0])*(1 - sqrt(3)/2)  # these only work for 30 deg angles!!!!
FiBwPlu := stack(FiBwDrainFittings, FiBwDrainPlu, ThawMultiple(["*bw*"]), Rotate_All([FiPipe_Origin[0]; FiPipe_Origin[1]], AN_FiBw), FreezeMultiple(["*bw*"]))
# Inlet Plumbing (includes LFOM)
FiInletTeeBottom_Origin := [-L_TeeDistance; 0; ShortTeeLength(ND_RMPipe)] + FiManBulkhead_Origin
FiInletTeeToDrain_Origin := FiInletTeeBottom_Origin + [-TeeLength(ND_RMPipe) - 2*SocketDepth(ND_RMPipe); 0; 0]
FiDrainValve_Origin := FiInletTeeToDrain_Origin + [
    -ShortTeeLength(ND_RMPipe) - SocketDepth(ND_RMPipe) - BallValveSocket(ND_RMPipe);
    0;
    -ShortTeeLength(ND_RMPipe)
]
FiDrainElbow_Origin := FiDrainValve_Origin + [-BallValveLength(ND_RMPipe) + BallValveSocket(ND_RMPipe) - SocketDepth(ND_RMPipe); 0; 0]
FiInletPipeToAirRelease_Origin := FiInletTeeToDrain_Origin + [0; 0; 3*SocketDepth(ND_RMPipe)]
L_FiInletPipeToAirReleaseTee := Tank2_Origin[2] - FiInletTeeToDrain_Origin[2] - 3*SocketDepth(ND_RMPipe) - ShortTeeLength(ND_RMPipe) + 1.1*ConRadius(ND_RMPipe) + H_Wall
FiAirReleaseTee_Origin := FiInletPipeToAirRelease_Origin + [0; ShortTeeLength(ND_RMPipe); L_FiInletPipeToAirReleaseTee + ShortTeeLength(ND_RMPipe)]
L_FiInletPipeH := Et_Origin[1] + S_Fitting + ConRadius(ND_RMPipe) - ElbowRadius(ND_RMPipe) - FiAirReleaseTee_Origin[1]
FiLfomElbow_Origin := FiAirReleaseTee_Origin + [0; L_FiInletPipeH; 0]
FiLfomCoupling_Origin := [
    FiLfomElbow_Origin[0];
    ElbowRadius(ND_RMPipe) + FiLfomElbow_Origin[1];
    Et_Origin[2] - SocketDepth(ND_RMPipe)
]
FiInletTee2_Origin := FiInletTeeBottom_Origin + [ShortTeeLength(ND_RMPipe); 0; -ShortTeeLength(ND_RMPipe) + 2*T_FiLayer]
FiInletTee3_Origin := FiInletTee2_Origin + [0; 0; 2*T_FiLayer]
FiInletElbow_Origin := [-ShortTeeLength(ND_RMPipe) + ElbowRadius(ND_RMPipe); 0; 2*T_FiLayer] + FiInletTee3_Origin
FiInletReducerBottom_Origin := [
    FiInletElbow_Origin[0] + 2*SocketDepth(ND_RMPipe);
    FiInletElbow_Origin[1];
    FiInletTeeBottom_Origin[2] - ShortTeeLength(ND_RMPipe)
]
FiInletBallValveBottom_Origin := [
    FiManBulkhead_Origin[0] - BulkheadThreadLength(ND_RMPipe) + BallValveSocket(ND_RMPipe) - L_FiManBulkheadOffset;
    FiManBulkhead_Origin[1];
    FiManBulkhead_Origin[2]
]
FullReducerLength := 2*SocketDepth(ND_FiManTrunk) + SocketDepth(ND_RMPipe)  # right now the reducer uses length as an input
FiInletAdapterBottom_Origin := FiInletReducerBottom_Origin + [FullReducerLength - SocketDepth(ND_RMPipe) + SocketDepth(ND_FiManTrunk); 0; 0]
FiInletManifoldFittingsLyr := layer_new("FiInletManFittingsPlu", green)
FiInletReducer := reducerF(FiInletReducerBottom_Origin, [180; 0; 0]*deg, ND_RMPipe, ND_FiManTrunk, SocketDepth(ND_FiManTrunk), PS_Fi)
FiInletBallValve := InsertDwg(BallValveDwg, FiInletBallValveBottom_Origin, ND_RMPipe, 0 deg)
FiInletAdapter := MaleAdapterF(FiInletAdapterBottom_Origin, [180; 0]*deg, ND_FiManTrunk, PS_Fi)
ArrayFiInFittings := array_all(4, 1, 2*T_FiLayer)
FiInletBottomTee := TeeF(FiInletTeeBottom_Origin, [0; 0; 90]*deg, ND_RMPipe, PS_Fi)
FiInletTeeToDrain := TeeF(FiInletTeeToDrain_Origin, [0; 0; 90]*deg, ND_RMPipe, PS_Fi)
FiAirReleaseTee := TeeF(FiAirReleaseTee_Origin, [0; 90; 0]*deg, ND_RMPipe, PS_Fi)
FiDrainValve := InsertDwg(BallValveDwg, FiDrainValve_Origin, ND_RMPipe, 0)
FiDrainElbow := ElbowF(FiDrainElbow_Origin, [90; 0; 90]*deg, ND_RMPipe, PS_Fi)
FiLfomElbow := ElbowF(FiLfomElbow_Origin, [0; 90; 0]*deg, ND_RMPipe, PS_Fi)
FiLfomCoupling := CouplingSUBF(FiLfomCoupling_Origin, [0; 270]*deg, ND_RMPipe, PS_Fi, ["FlowMeteringTank"])
FiInletTee2 := TeeF(FiInletTee2_Origin, [270; 0; 90]*deg, ND_RMPipe, PS_Fi)
FiInletTee3 := TeeF(FiInletTee3_Origin, [270; 0; 90]*deg, ND_RMPipe, PS_Fi)
FiInletElbow := ElbowF(FiInletElbow_Origin, [90; 0; 90]*deg, ND_RMPipe, PS_Fi)
FiInletManifoldFittingsFrz := FreezeLayer("FiInletManFittingsPlu")
FiInletFittings := stack(FiInletManifoldFittingsLyr, FiInletReducer, FiInletBallValve, FiInletAdapter, view("f"), ArrayFiInFittings, view("t"), FiInletBottomTee, FiDrainValve, FiDrainElbow, FiInletTeeToDrain, FiAirReleaseTee, FiInletTee2, FiInletTee3, FiInletElbow, FiLfomElbow, FiLfomCoupling, FiInletManifoldFittingsFrz)
FiInletPipesLyr := layer_new("FiInletManPlu", blue)
FiLfom := PipeF(FiLfomCoupling_Origin, H_Et, [0; 90]*deg, ND_RMPipe, PS_Fi)
FiInletPipesFrz := FreezeLayer("FiInletManPlu")
LfomOrifices :=
    Local ← FiInletPipesFrz
    for h ∈ 0 .. last(H_LfomOrifices)
        if N_LfomOrifices[h] ≠ 0
            Local ← stack(Local, CylinderF([
                FiLfomCoupling_Origin[0];
                FiLfomCoupling_Origin[1];
                Et_Origin[2] + H_Et - H_Freeboard - HL_Lfom + H_LfomOrifices[h]
            ], D_LfomOrifices/2, outerradius(ND_RMPipe) + zc, [
                90 deg + (asin(0.5*S_LfomOrificesMin/(2*outerradius(ND_RMPipe))) + asin(D_LfomOrifices/(2*outerradius(ND_RMPipe))))*(mod(h, 2) == 0);
                0 deg
            ]))
        if N_LfomOrifices[h] > 1
            Local ← stack(Local, ArrayLastPolar([
                FiLfomCoupling_Origin[0];
                FiLfomCoupling_Origin[1];
                Et_Origin[2] + H_Et - H_Freeboard - HL_Lfom + H_LfomOrifices[h]
            ], N_LfomOrifices[h], (N_LfomOrifices[h] - 1)*(2*asin(D_LfomOrifices/(2*outerradius(ND_RMPipe))) + 2*asin(S_LfomOrificesMin/(2*outerradius(ND_RMPipe))))))
    return Local
SelectInletPipes := SelectLayer("FiInletManPlu")
SubtractLfomOrifices := stack(view("t"), SubtractAll(FiLfomCoupling_Origin + [-outerradius(ND_RMPipe); 0; 0]))
L_BottomPipeV := FiInletTee2_Origin[2] - FiInletTeeBottom_Origin[2] - ShortTeeLength(ND_RMPipe)
FiInletManBottomPipeV := PipeF(FiInletTeeBottom_Origin, L_BottomPipeV, [0; 90]*deg, ND_RMPipe, PS_Fi)
L_InletManPipe2V := FiInletTee3_Origin[2] - FiInletTee2_Origin[2] - TeeLength(ND_RMPipe)
FiInletManPipe2V := PipeF(FiInletTee2_Origin + [-ShortTeeLength(ND_RMPipe); 0; ShortTeeLength(ND_RMPipe)], L_InletManPipe2V, [0; 90]*deg, ND_RMPipe, PS_Fi)
L_InletManPipe3V := FiInletElbow_Origin[2] - FiInletTee3_Origin[2] - ShortTeeLength(ND_RMPipe) - ElbowRadius(ND_RMPipe)
FiInletManPipe3V := PipeF(FiInletTee3_Origin + [-ShortTeeLength(ND_RMPipe); 0; ShortTeeLength(ND_RMPipe)], L_InletManPipe3V, [0; 90]*deg, ND_RMPipe, PS_Fi)
# LH = left horiz
L_InletPipeBottomLH := -(FiInletTeeBottom_Origin[0] - FiInletReducerBottom_Origin[0]) - ShortTeeLength(ND_RMPipe)
FiInletPipeBottomLH := PipeF(FiInletReducerBottom_Origin, L_InletPipeBottomLH, [0; 0]*deg, ND_RMPipe, PS_Fi)
N_FiInletPipeBottom := 3
ArrayFiInletPipeLH := ArrayLast(N_FiInletPipeBottom, 1, 2*T_FiLayer)
L_FiInletPipeTopLH := -(FiInletElbow_Origin[0] - FiInletReducerBottom_Origin[0])
FiInletPipeTopLH := PipeF([FiInletReducerBottom_Origin[0]; FiInletReducerBottom_Origin[1]; FiInletElbow_Origin[2]], L_FiInletPipeTopLH, [0; 0]*deg, ND_RMPipe, PS_Fi)
FiInletNippleH := PipeF(FiInletAdapterBottom_Origin, 2*SocketDepth(ND_FiManTrunk), [0; 0]*deg, ND_FiManTrunk, PS_Fi)
L_FiPipeToDose := 3*SocketDepth(ND_RMPipe)
FiInletTeePipeToDosePoint := PipeF(FiInletTeeToDrain_Origin, L_FiPipeToDose, [0; 90]*deg, ND_RMPipe, PS_Fi)
FiInletPipeToAirReleaseTee := PipeF(FiInletPipeToAirRelease_Origin, L_FiInletPipeToAirReleaseTee, [0; 90]*deg, ND_RMPipe, PS_Fi)
L_FiAirRelease := FiLfomCoupling_Origin[2] + H_Et - FiAirReleaseTee_Origin[2] - ShortTeeLength(ND_RMPipe)
FiAirReleasePipe := PipeF(FiAirReleaseTee_Origin + [0; -ShortTeeLength(ND_RMPipe); ShortTeeLength(ND_RMPipe)], L_FiAirRelease, [0; 90]*deg, ND_RMPipe, PS_Fi)
FiInletPipeH := PipeF(FiAirReleaseTee_Origin, L_FiInletPipeH, [270; 0]*deg, ND_RMPipe, PS_Fi)
L_FiLfomInlet := (Et_Origin[2] - CouplingLength(ND_RMPipe) + SocketDepth(ND_RMPipe) - FiLfomElbow_Origin[2]) - ElbowRadius(ND_RMPipe)
FiLfomInlet := PipeSUBF(FiLfomElbow_Origin + [0; ElbowRadius(ND_RMPipe); ElbowRadius(ND_RMPipe)], L_FiLfomInlet, [0; 90]*deg, ND_RMPipe, PS_Fi, ["FlowMeteringTank"])
ArrayFiInletNipple := ArrayLast(4, 1, 2*T_FiLayer)
FiInletPipes := stack(FiInletPipesLyr, FiLfom, FiInletPipesFrz, LfomOrifices, SelectInletPipes, SubtractLfomOrifices, FiInletManBottomPipeV, FiInletManPipe2V, FiInletManPipe3V, FiInletPipeTopLH, FiInletPipeBottomLH, view("f"), ArrayFiInletPipeLH, view("t"), FiInletNippleH, view("f"), ArrayFiInletNipple, view("t"), FiInletTeePipeToDosePoint, FiInletPipeToAirReleaseTee, FiAirReleasePipe, FiInletPipeH, FiLfomInlet, FiInletPipesFrz)
FiInletPlu := stack(FiInletFittings, FiInletPipes)
# Outlet Plumbing
FiCheckValve_Origin := [
    (BulkheadThreadLength(ND_FiManTrunk) + ChkValveLength(ND_FiManTrunk) - 2*ChkValveSocket(ND_FiManTrunk)) + 2*FiPipe_Origin[0] - FiManBulkhead_Origin[0];
    FiManBulkhead_Origin[1];
    FiManBulkhead_Origin[2] + T_FiLayer
]
FiOutletAdapter_Origin := FiCheckValve_Origin + [MaleAdapterLength(ND_FiManTrunk) - SocketDepth(ND_FiManTrunk); 0; 0] = [-0.337333; -0.63039; -0.490452] m
FiOutletReducer_Origin := FiOutletAdapter_Origin + [3*SocketDepth(ND_FiManTrunk); 0; 0] = [-0.199333; -0.63039; -0.490452] m
FiOutletManElbow_Origin := [2*SocketDepth(ND_RMPipe) + ElbowRadius(ND_RMPipe); 0; ElbowRadius(ND_RMPipe)] + FiOutletReducer_Origin
FiOutletManTeeBottom_Origin := [2*SocketDepth(ND_RMPipe) + ElbowRadius(ND_RMPipe) - ShortTeeLength(ND_RMPipe); 0; 2*T_FiLayer] + FiOutletReducer_Origin
FiDischargeElbow1_Origin := [
    ShortTeeLength(ND_RMPipe) + FiOutletManTeeBottom_Origin[0];
    FiOutletManTeeBottom_Origin[1];
    FiOutletManTeeBottom_Origin[2] + 2*SocketDepth(ND_RMPipe) + 2*T_FiLayer + ShortTeeLength(ND_RMPipe)
]
FiDischargeElbow2_Origin := [0; ElbowRadius(ND_RMPipe) + T_TankWall + ConRadius(ND_FiPipe); ElbowRadius(ND_RMPipe)] + FiDischargeElbow1_Origin
FiOutletFittingsLyr := layer_new("FiOutletManFittingsPlu", green)
FiOutletCheckValves := InsertDwg(ChkValveDwg, FiCheckValve_Origin, ND_FiManTrunk, 0 deg)
ArrayFiOutletCheckValves := ArrayLast(3, 1, 2*T_FiLayer)
FiOutletAdapter := MaleAdapterF(FiOutletAdapter_Origin, [0; 0]*deg, ND_FiManTrunk, PS_Fi)
FiOutletReducer := reducerF(FiOutletReducer_Origin, [0; 0; 0]*deg, ND_RMPipe, ND_FiManTrunk, SocketDepth(ND_FiManTrunk), PS_Fi)
FiOutletManElbow := ElbowF(FiOutletManElbow_Origin, [0; 0; 270]*deg, ND_RMPipe, PS_Fi)
FiOutletManTeeBottom := TeeF(FiOutletManTeeBottom_Origin, [90; 0; 90]*deg, ND_RMPipe, PS_Fi)
ArrayFiTeeBottom := ArrayLast(2, 1, 2*T_FiLayer)
FiDischargeElbow1 := ElbowF(FiDischargeElbow1_Origin, [270; 270; 0]*deg, ND_RMPipe, PS_Fi)
FiDischargeElbow2 := ElbowF(FiDischargeElbow2_Origin, [0; 270; 0]*deg, ND_RMPipe, PS_Fi)
FiOutletFittingsFrz := FreezeLayer("FiOutletManFittingsPlu")
FiOutletFittings := stack(FiOutletFittingsLyr, FiOutletCheckValves, view("f"), ArrayFiOutletCheckValves, view("t"), FiOutletAdapter, view("f"), ArrayFiOutletCheckValves, view("t"), FiOutletReducer, view("f"), ArrayFiOutletCheckValves, view("t"), FiOutletManElbow, FiOutletManTeeBottom, view("f"), ArrayFiTeeBottom, view("t"), FiDischargeElbow1, FiDischargeElbow2, FiOutletFittingsFrz)
FiOutletPipesLyr := layer_new("FiOutletPlu", blue)
FiOutletNipple := PipeF([
    FiOutletAdapter_Origin[0] + 2*SocketDepth(ND_FiManTrunk);
    FiOutletAdapter_Origin[1];
    FiOutletAdapter_Origin[2]
], 2*SocketDepth(ND_FiManTrunk), [0; 0]*deg, ND_FiManTrunk, PS_Fi)
FiBottomHOutlManPipe := PipeF([
    FiOutletReducer_Origin[0] + 2*SocketDepth(ND_RMPipe);
    FiOutletAdapter_Origin[1];
    FiOutletAdapter_Origin[2]
], 2*SocketDepth(ND_RMPipe), [0; 0]*deg, ND_RMPipe, PS_Fi)
FiMidHOutlManPipe := PipeF([FiOutletManTeeBottom_Origin[0]; FiOutletAdapter_Origin[1]; 2*T_FiLayer + FiOutletAdapter_Origin[2]], 2*SocketDepth(ND_RMPipe) + ElbowRadius(ND_RMPipe) - ShortTeeLength(ND_RMPipe), [0; 0]*deg, ND_RMPipe, PS_Fi)
FiUpperHOutlManPipe := PipeF([FiOutletManTeeBottom_Origin[0]; FiOutletAdapter_Origin[1]; 4*T_FiLayer + FiOutletAdapter_Origin[2]], 2*SocketDepth(ND_RMPipe) + ElbowRadius(ND_RMPipe) - ShortTeeLength(ND_RMPipe), [0; 0]*deg, ND_RMPipe, PS_Fi)
FiUpperVOutManPipe := PipeF(FiOutletManTeeBottom_Origin + [ShortTeeLength(ND_RMPipe); 0; ShortTeeLength(ND_RMPipe) + 2*T_FiLayer], 2*SocketDepth(ND_RMPipe), [0; 90]*deg, ND_RMPipe, PS_Fi)
FiMidVOutManPipe := PipeF(FiOutletManTeeBottom_Origin + [ShortTeeLength(ND_RMPipe); 0; ShortTeeLength(ND_RMPipe)], 2*T_FiLayer - TeeLength(ND_RMPipe), [0; 90]*deg, ND_RMPipe, PS_Fi)
FiLowerVOutManPipe := PipeF(FiOutletManElbow_Origin, 2*T_FiLayer - ShortTeeLength(ND_RMPipe) - ElbowRadius(ND_RMPipe), [0; 90]*deg, ND_RMPipe, PS_Fi)
L_FiPipeToDischarge := T_TankWall + ConRadius(ND_FiPipe)
FiPipeToDischarge := PipeF(FiDischargeElbow2_Origin, L_FiPipeToDischarge, [90; 0]*deg, ND_RMPipe, PS_Fi)
FiOutletPipesFrz := FreezeLayer("FiOutletPlu")
FiOutletPipes := stack(FiOutletPipesLyr, FiOutletNipple, view("f"), ArrayFiOutletCheckValves, view("t"), FiBottomHOutlManPipe, FiMidHOutlManPipe, FiUpperHOutlManPipe, FiMidVOutManPipe, FiUpperVOutManPipe, FiLowerVOutManPipe, FiPipeToDischarge, FiOutletPipesFrz)
FiOutletPlu := stack(FiOutletFittings, FiOutletPipes)
FiInExManPlu := stack(FiInletPlu, FiOutletPlu)
# Operator Access/Walls
# Chem doser platform
H_Ledge := 25 cm
L_ChemPlatform := 2*max(R_CoagTank, R_ChlorineTank) + 2*S_Fitting + S_Walkway = 1.3715 m
W_ChemPlatform := 4*S_Fitting + 2*R_CoagTank + 2*R_ChlorineTank = 1.343 m
Z_ChemPlatformTop := Et_Origin[2] + H_Et + H_CoagTankAboveHeadTank
ChemPlatform_Origin := [T_TankWall + Tank1_Origin[0]; L_Et - T_TankWall + 2*T_Et + Tank1_Origin[1]; Z_ChemPlatformTop]
# Stairs and associated platforms
H_SingleStair := 20 cm
L_UpperPlatformEst := S_Walkway*5/6
W_SingleStair := 30 cm
L_StairsUpEst := L_ChemPlatform - L_UpperPlatformEst
H_StairsUp := 2/3*L_StairsUpEst = 0.525444 m
N_StairsUp := round(H_StairsUp/H_SingleStair)
L_StairsUp := N_StairsUp*W_SingleStair
W_UpperPlatform := S_Walkway*5/6
L_UpperPlatform := L_ChemPlatform - L_StairsUp = 0.4715 m
L_LowerPlatform := W_UpperPlatform
W_LowerPlatform := L_LowerPlatform
W_FiStairs := W_LowerPlatform
L_StairsUpper := L_ChemPlatform - L_UpperPlatform = 0.9 m
H_StairsUpper := L_StairsUpper*2/3
H_StairsLow := ChemPlatform_Origin[2] - Tank2_Origin[2] - H_Wall - H_StairsUp - T_Platform
H_StairsToFi := Tank2_Origin[2] + H_Wall - (FiPipe_Origin[2] - T_FiCap - T_Platform) = 1.53618 m
N_StairsToFi := round(H_StairsToFi/H_SingleStair)
L_StairsToFi := N_StairsToFi*W_SingleStair = 2.4 m
W_PlatformToFiStairs := W_Wall + 2*T_TankWall - L_StairsToFi + 2.2*ConRadius(ND_FiPipe) + S_Walkway
StairPlatformUpper_Origin := [0; W_ChemPlatform; 0] + ChemPlatform_Origin
StairPlatformLower_Origin := [
    ChemPlatform_Origin[0] + L_ChemPlatform;
    ChemPlatform_Origin[1] + W_ChemPlatform;
    StairPlatformUpper_Origin[2] - H_StairsUpper
]
StairsUpper_Origin := [L_UpperPlatform; W_UpperPlatform; 0] + StairPlatformUpper_Origin
OpAccessLyr := layer_new("OperatorAccess", grey)
FiPlatform := BoxF([
    W_FiStairs + Tank2_Origin[0] + T_TankWall;
    -T_TankWall + Tank2_Origin[1];
    FiPipe_Origin[2] - T_FiCap
], [
    -T_TankWall + Tank2_Origin[0] - L_Wall;
    FiPipe_Origin[1] - ConRadius(ND_FiPipe) - S_Walkway;
    FiPipe_Origin[2] - T_FiCap - T_Platform
], [0; 0; 0]*deg)
ChemPlatform := BoxF(ChemPlatform_Origin, [
    T_TankWall + L_ChemPlatform + Tank1_Origin[0];
    L_Et - T_TankWall + 2*T_Et + W_ChemPlatform + Tank1_Origin[1];
    Z_ChemPlatformTop - T_Platform
], [0; 0; 0]*deg)
ChemPlatformSeparatorXSouth := BoxF([T_TankWall; L_Et - T_TankWall + T_Et; -T_TankWall - L_TankOffset] + Tank1_Origin, [
    T_TankWall + Tank1_Origin[0] + L_ChemPlatform;
    L_Et - T_TankWall + 2*T_Et + Tank1_Origin[1];
    Z_ChemPlatformTop - T_Platform + H_Ledge
], [0; 0; 0]*deg)
CHTWall := BoxF(ChemPlatform_Origin + [L_ChemPlatform; 0; 0], [
    L_ChemPlatform - T_Platform + ChemPlatform_Origin[0];
    W_ChemPlatform + ChemPlatform_Origin[1];
    Tank2_Origin[2] + H_Wall
], [0; 0; 0]*deg)
ChemPlatformSeparatorXNorth := BoxF(StairPlatformUpper_Origin, StairPlatformUpper_Origin + [L_ChemPlatform; -T_Platform; -H_StairsUpper], [0; 0; 0]*deg)
PlatformToFiStairs := BoxF(Tank2_Origin + [T_TankWall; T_TankWall + W_Wall; H_Wall], Tank2_Origin + [T_TankWall + W_FiStairs; T_TankWall + W_Wall - W_PlatformToFiStairs; H_Wall - T_Platform], [0; 0; 0]*deg)
StairPlatformUpper := BoxF(StairPlatformUpper_Origin, [L_UpperPlatform; W_UpperPlatform; -T_Platform] + StairPlatformUpper_Origin, [0; 0; 0]*deg)
StairPlatformLower := BoxF(StairPlatformLower_Origin, [L_LowerPlatform; W_LowerPlatform; -T_Platform] + StairPlatformLower_Origin, [0; 0; 0]*deg)
StairsUpper := Stairs(StairsUpper_Origin, W_UpperPlatform, H_StairsUpper, 0 deg)
StairsLower := Stairs(StairPlatformLower_Origin + [L_LowerPlatform; 0; 0], W_LowerPlatform, H_StairsLow, 270 deg)
StairsToFi := Stairs(Tank2_Origin + [T_TankWall + W_FiStairs; T_TankWall + W_Wall - W_PlatformToFiStairs; H_Wall], W_FiStairs, H_StairsToFi, 270 deg)
OpAccessFrz := FreezeLayer("OperatorAccess")
FiBwDrainHole := BoxF([
    FiBwTee_Origin[0] + ShortTeeLength(ND_FiBwDrain) - 1.1/4*D_Bucket5Gal - X_FiBwDrainPipeOffset;
    FiBwTee_Origin[1] + ShortTeeLength(ND_FiBwDrain) + 1.05/2*D_Bucket5Gal - Y_FiBwDrainPipeOffset;
    FiPipe_Origin[2] - T_FiCap
], [
    FiBwTee_Origin[0] + ShortTeeLength(ND_FiBwDrain) + 3.1/4*D_Bucket5Gal - X_FiBwDrainPipeOffset;
    FiBwTee_Origin[1] + ShortTeeLength(ND_FiBwDrain) - 1.05/2*D_Bucket5Gal - Y_FiBwDrainPipeOffset;
    FiPipe_Origin[2] - T_FiCap - T_Platform
], [0; 0; 0]*deg)
SubtractDrainHoles := SubtractF(["OperatorAccess"], "DeleteMe")
FiBwBucketLyr := layer_new("FiBwBucket", yellow)
H_BwDrain := 5 cm
W_BwDrain := 1.05*D_Bucket5Gal
BwBucket := CylinderF([
    FiBwTee_Origin[0] + ShortTeeLength(ND_FiBwDrain) + 1/4*D_Bucket5Gal - X_FiBwDrainPipeOffset;
    FiBwTee_Origin[1] + ShortTeeLength(ND_FiBwDrain) - Y_FiBwDrainPipeOffset;
    FiPipe_Origin[2] - T_FiCap - T_Platform - T_FiFlange - H_BwDrain
], D_Bucket5Gal/2, H_Bucket5Gal, [0; 90]*deg)
FiBwBucketFrz := FreezeLayer("FiBwBucket")
BwBucketSub := CylinderF([
    FiBwTee_Origin[0] + ShortTeeLength(ND_FiBwDrain) + 1/4*D_Bucket5Gal - X_FiBwDrainPipeOffset;
    FiBwTee_Origin[1] + ShortTeeLength(ND_FiBwDrain) - Y_FiBwDrainPipeOffset;
    FiPipe_Origin[2] - T_FiCap - T_Platform - T_FiFlange - H_BwDrain + T_ChemTankWall
], D_Bucket5Gal/2 - T_ChemTankWall, H_Bucket5Gal, [0; 90]*deg)
SubtractBwBucket := SubtractF(["FiBwBucket"], "DeleteMe")
BwBucketScript := stack(FiBwBucketLyr, BwBucket, FiBwBucketFrz, BwBucketSub, GroupDelete, SubtractBwBucket)
OpAccessScript := stack(OpAccessLyr, FiPlatform, ChemPlatform, ChemPlatformSeparatorXSouth, ChemPlatformSeparatorXNorth, CHTWall, StairPlatformUpper, StairPlatformLower, StairsUpper, StairsLower, StairsToFi, PlatformToFiStairs, Union_All, OpAccessFrz, FiBwDrainHole, GroupDelete, SubtractDrainHoles, BwBucketScript)
# Drain Box
H_DC := H_BwDrain + T_Platform
HL_DCMax := 5 cm
L_DC := FiBwTee_Origin[0] + ShortTeeLength(ND_FiBwDrain) - Tank1_Origin[0] + T_ChannelWall
W_DC := max(W_HorizChannel(1.2*Q_Fi, H_DC, HL_DCMax, L_DC, Nu_Water, E_Concrete, 1), Y_FiBwDrainPipeOffset + 1.1*ConRadius(ND_RMPipe) + 1.1*ConRadius(ND_FiBwDrain)) = 0.461996 m
DCLyr := layer_new("DrainBox", grey)
DC := DrainChannelF([
    Tank1_Origin[0] + L_DC + T_ChannelWall;
    FiDrainElbow_Origin[1] - Y_FiBwDrainPipeOffset - 1.1*ConRadius(ND_FiBwDrain);
    FiPipe_Origin[2] - T_FiCap - T_Platform
], [0; 0; 0]*deg, 1.2*Q_Fi, W_DC, H_DC, L_DC, HL_DCMax/L_DC, Nu_Water, E_Concrete, 1)
DCCap := BoxF([
    Tank1_Origin[0] + L_DC + T_ChannelWall;
    FiDrainElbow_Origin[1] - Y_FiBwDrainPipeOffset - 1.1*ConRadius(ND_FiBwDrain);
    FiPipe_Origin[2] - T_FiCap - T_Platform
], [
    Tank1_Origin[0] + L_DC;
    FiDrainElbow_Origin[1] - Y_FiBwDrainPipeOffset - 1.1*ConRadius(ND_FiBwDrain) + W_DC;
    FiPipe_Origin[2] - T_FiCap - T_Platform - H_DC - HL_DCMax
], [0; 0; 0]*deg)
DCFrz := FreezeLayer("DrainBox")
DCScript := stack(DCLyr, DC, DCCap, Union_All, DCFrz)
L_DrainBoxOutlet := FiPipe_Origin[2] - Tank2_Origin[2] + Z_BottomLowerTank - H_DC
ND_DrainBoxOutlet := D_pipeschedule(1.2*Q_Fi, PS_Fi, L_DrainBoxOutlet, L_DrainBoxOutlet, Nu_Water, E_Pvc, K_El90 + K_PipeEnt) = 1.5 in
# Chem Tanks
CoagTank_Origin := ChemPlatform_Origin + [S_Fitting + max(R_CoagTank, R_ChlorineTank) + S_Walkway; S_Fitting + R_CoagTank; 0]
ChlorineTank_Origin := CoagTank_Origin + [0; S_Fitting + R_CoagTank + R_ChlorineTank; 0]
ChemTankLyr := layer_new("ChemicalTanks", yellow)
CoagTank := CylinderF(CoagTank_Origin, R_CoagTank + T_ChemTankWall, H_CoagTank + T_ChemTankWall, [0; 90]*deg)
ChlorineTank := CylinderF(ChlorineTank_Origin, R_ChlorineTank + T_ChemTankWall, H_ChlorineTank + T_ChemTankWall, [0; 90]*deg)
ChemTankFrz := FreezeLayer("ChemicalTanks")
CoagTankInner := CylinderF(CoagTank_Origin + [0; 0; T_ChemTankWall], R_CoagTank, H_CoagTank, [0; 90]*deg)
ChlorineTankInner := CylinderF(ChlorineTank_Origin + [0; 0; T_ChemTankWall], R_ChlorineTank, H_ChlorineTank, [0; 90]*deg)
HollowTanks := SubtractF(["ChemicalTanks"], "DeleteMe")
ChemTanksScript := stack(ChemTankLyr, CoagTank, ChlorineTank, ChemTankFrz, CoagTankInner, ChlorineTankInner, GroupDelete, HollowTanks)
# Slotted Pipe Molded
SlottedPipe_Origin := [0; 0; 0]*m
OuterMold_Origin := [outerdiameter(ND_FiManTrunk)/2 - L_BranchExtend; -(1.1*ConRadius(ND_FiManBranch)); 0] + SlottedPipe_Origin
FiSlottedSampleLyr := layer_new("FiSlottedSample", blue)
SlottedPipe := PipeF([0; 0; 0]*m, L_FiManBranch[0], [0; 0]*deg, ND_FiManBranch, PS_Fi)
FiSlottedSampleFrz := FreezeLayer("FiSlottedSample")
PipeMoldOuter := CylinderF(OuterMold_Origin, outerdiameter(ND_FiManTrunk)/2, 2.2*ConRadius(ND_FiManBranch), [270; 0]*deg)
PipeSubtraction := CylinderF(SlottedPipe_Origin, D_BranchSlotOrifice/2, outerdiameter(ND_FiManTrunk), [0; 0]*deg)
SubtractMold := SubtractAll(OuterMold_Origin)
SquishPipe := SubtractF(["FiSlottedSample"], "DeleteMe")
L_SlotFromCenter := sqrt((innerdiameter(ND_FiManBranch, PS_Fi)/2)^2 - (L_slots/2)^2)
L_FiBranchAvail := L_FiManBranch[0] - 0.75*CapHeight(ND_FiManBranch) - L_BranchExtend = 0.130862 m
B_Slots := (L_FiBranchAvail - W_slots)/(0.5*N_slots*L_FiBranchAvail - 1) = 0.00324897 m
N_FiSlotsOneSide := Ceil(L_FiBranchAvail*N_slots*0.5, 1) = 42
SlotBox := BoxF([
    -L_BranchExtend - 0.25*CapHeight(ND_FiManBranch) - W_slots;
    L_SlotFromCenter;
    outerdiameter(ND_FiManBranch)
] + SlottedPipe_Origin, [
    -L_BranchExtend - 0.25*CapHeight(ND_FiManBranch);
    outerdiameter(ND_FiManBranch);
    -outerdiameter(ND_FiManBranch)
] + SlottedPipe_Origin, [0; 0; 0]*deg)
MirrorSlot := MirrorLast([SlottedPipe_Origin[0]; SlottedPipe_Origin[1]], [SlottedPipe_Origin[0] - zc; SlottedPipe_Origin[1]], "n")
ArraySlots := Array_All(1, N_FiSlotsOneSide, -B_Slots)
B_Slots = 3.24897 mm
SubtractSlots := SubtractF(["FiSlottedSample"], "DeleteMe")
SlottedSampleCapLyr := layer_new("FiSlottedCapSample", red)
SampleCap := CutCapF(SlottedPipe_Origin - [L_FiManBranch[0]; 0; 0], CapHeight(ND_FiManBranch)/2, [180; 0]*deg, ND_FiManBranch)
SlottedSampleCapFrz := FreezeLayer("FiSlottedCapSample")
FiSlottedSample := stack(FiSlottedSampleLyr, SlottedPipe, FiSlottedSampleFrz, PipeMoldOuter, GroupDelete, PipeSubtraction, SubtractMold, SquishPipe, SlotBox, MirrorSlot, ArraySlots, GroupDelete, SubtractSlots, SlottedSampleCapLyr, SampleCap, SlottedSampleCapFrz)
# Pump Screen
ND_PipeScreen := 4 in
OD_Ring := innerdiameter(ND_PipeScreen, PS_Fi) = 10.226 cm
ID_Ring := 9 cm
HL_PipeScreenMax := 5 cm
HL_Piping := h_l(Rate_Pump, innerdiameter(ND_PipeScreen, PS_Fi), 1 m, K_PipeEnt + K_El90 + K_checkValve, Nu_Water, E_Pvc) + HL_PipeScreenMax + h_orifice(ID_Ring, Pi_VenaContractaOrifice, Rate_Pump) = 1.46391 m
P_RequiredPipeScreenMax := HL_Piping*Rho_H2O*g = 2.08217 psi
A_Screen := Rate_Pump/(sqrt(2*g*HL_PipeScreenMax)*Pi_VenaContractaOrifice) = 0.0240431 m^2
L_SlotScreen := 0.8*innerdiameter(ND_PipeScreen, PS_Fi)*π/2 = 0.128504 m
A_Slot := 2*W_slots*L_SlotScreen = 5.14017e-5 m^2
N_Slots := Ceil(A_Screen/A_Slot, 2)
N_Slots = 468
L_ScreenPipe := N_Slots/N_slots = 0.74295 m
AC_LFSRSF := stack(TanksToEt, EntranceTankScript, FiBodyPipe, DrawFiManPipes, DrawFiManFittings, ArrayFiManifolds, FiBwPlu, FiInExManPlu, FiTesterScript, FiCapsScript, FiSandDrainScript, OpAccessScript, DCScript, ChemTanksScript)
# [component: inputs AC_LFSRSF]
Q_Fi = 2.85342 L/s
# [component: inputs FiSlottedSample]
# Materials List
ItemDescribe(ND, type) := concat(stringit_nounits(ND/in), "in ND ", type)
WaterLevelMeasurement := [
    "Quantity", "Length", "Item";
    "2", stringit(0 m), ItemDescribe(ND_MeterCasing, "Coupling");
    "2", stringit(H_StorageMeter), ItemDescribe(ND_MeterCasing, "Pipe");
    "2", stringit(H_StorageMeterCasing), ItemDescribe(ND_Meter, "ThinWallPipe");
    "4", stringit(0 m), ItemDescribe(ND_Meter, "Caps")
]
InletPlumbing := [
    "Quantity", "Length", "Item";
    "1", stringit(H_Et), ItemDescribe(ND_RMPipe, "LFOM Pipe");
    "1", stringit(L_FiPipeToDose), ItemDescribe(ND_RMPipe, "Pipe");
    "1", stringit(L_FiInletPipeToAirReleaseTee), ItemDescribe(ND_RMPipe, "Pipe");
    "1", stringit(L_FiAirRelease), ItemDescribe(ND_RMPipe, "Pipe");
    "1", stringit(L_FiInletPipeH), ItemDescribe(ND_RMPipe, "Pipe");
    "1", stringit(L_FiLfomInlet), ItemDescribe(ND_RMPipe, "Pipe");
    "2", stringit(0 m), ItemDescribe(ND_RMPipe, "Coupling");
    "2", stringit(0 m), ItemDescribe(ND_RMPipe, "Elbow");
    "1", stringit(0 m), ItemDescribe(ND_RMPipe, "Tee");
    "1", stringit(0 m), ItemDescribe(ND_RMPipe, "BallValve");
    "2", stringit(0 m), ItemDescribe(ND_RMPipe, "Slip-to-Thread Adapters");
    "2", stringit(0 m), ItemDescribe(ND_RMPipe, "Fernco Couplings")
]
OutletPlumbing := [
    "Quantity", "Length", "Item";
    "2", stringit(0 m), ItemDescribe(ND_RMPipe, "Elbows");
    "1", stringit(0 m), ItemDescribe(ND_RMPipe, "BallValve");
    "1", stringit(L_FiPipeToDischarge), ItemDescribe(ND_RMPipe, "Pipe");
    "2", stringit(0 m), ItemDescribe(ND_RMPipe, "Slip-to-Thread Adapters");
    "1", stringit(0 m), ItemDescribe(ND_RMPipe, "Fernco Coupling")
]
RawWaterOutlet := [
    "Quantity", "Length", "Item";
    "1", stringit(0 m), ItemDescribe(ND_TankToRawCHT, "Coupling");
    "2", stringit(0 m), ItemDescribe(ND_TankToRawCHT, "Slip-to-Thread Adapters");
    "1", stringit(0 m), ItemDescribe(ND_TankToRawCHT, "Gate Valve");
    "2", stringit(0 m), ItemDescribe(ND_TankToRawCHT, "Slip-to-Thread Adapters");
    "1", stringit(L_Et), ItemDescribe(ND_TankToRawCHT, "Pipe")
]
CleanWaterOutlet := [
    "Quantity", "Length", "Item";
    "1", stringit(0 m), ItemDescribe(ND_FiCleanOutlet, "Coupling");
    "1", stringit(0 m), ItemDescribe(ND_FiCleanOutlet, "Elbow");
    "1", stringit(0 m), ItemDescribe(ND_FiCleanOutlet, "Gate Valve");
    "1", stringit(0 m), ItemDescribe(ND_FiCleanOutlet, "Slip-to-Thread Adapters");
    "1", stringit(T_TankWall), ItemDescribe(ND_FiCleanOutlet, "Pipe")
]
EntranceTank := [
    "Quantity", "Length", "Item";
    "1", stringit(0 m), "Flow Metering Tank - 0.49 m^3 concrete volume";
    "1", stringit(0 m), "0.702m x 0.305m x 0.05m ferrocement baffle";
    "2", stringit(0 m), ItemDescribe(ND_EtDrain, "Coupling");
    "3", stringit(0 m), ItemDescribe(ND_EtDrain, "Elbows");
    "1", stringit(0 m), "Float Valve with 2" Orifice";
    "1", stringit(H_Et), ItemDescribe(ND_EtDrain, "Pipe");
    "1", stringit(L_EtDrainVertUpper), ItemDescribe(ND_EtDrain, "Pipe");
    "1", stringit(L_EtDrainHorizUpper), ItemDescribe(ND_EtDrain, "Pipe");
    "1", stringit(L_EtDrainVertLower), ItemDescribe(ND_EtDrain, "Pipe");
    "1", stringit(L_EtDrainHorizBottom), ItemDescribe(ND_EtDrain, "Pipe")
]
DrainBox := [
    "Quantity", "Length", "Item";
    "2", stringit(0 m), ItemDescribe(ND_DrainBoxOutlet, "Coupling");
    "1", stringit(0 m), ItemDescribe(ND_DrainBoxOutlet, "Elbow");
    "1", stringit(L_DrainBoxOutlet), ItemDescribe(ND_DrainBoxOutlet, "Pipe")
]
Title := ["AguaClara Low Flow Stacked Rapid Sand Filter", "", ""; "Materials List", "", ""]
Miscellaneous := [
    "Quantity", "Length", "Item";
    "2", stringit(0 m), "5 gallon buckets";
    "1", stringit(2 m), "1/8" clear flexible tubing";
    "2", stringit(0 m), "meter sticks";
    "3", stringit(0 m), ItemDescribe(ND_EtDrain, "Elbows")
]
msp(Component) := ["", "", ""; Component, "", ""]
# [component: inputs stack(Title, msp("WATER LEVEL MEASUREMENT"), WaterLevelMeasurement, msp("INLET PLUMBING"), InletPlumbing, msp("OUTLET PLUMBING"), OutletPlumbing, msp("RAW WATER OUTLET"), RawWaterOutlet, msp("CLEAN WATER OUTLET"), CleanWaterOutlet, msp("ENRANCE TANK"), EntranceTank, msp("DRAIN BOX"), DrainBox, msp("MISCELLANEOUS"), Miscellaneous)]
L_WaterLevelMeasurement :=
    for i ∈ 0 .. last(WaterLevelMeasurement[:, 1]) - 1
        L ← L + str2num(submatrix(WaterLevelMeasurement[:, 1], 1, last(WaterLevelMeasurement[:, 1]), 0, 0)[i])*m*str2num(submatrix(WaterLevelMeasurement[:, 0], 1, last(WaterLevelMeasurement[:, 0]), 0, 0)[i])*m
    L
    = 6.4 m^2
N_ND(Matrix) :=
    N_NDMatrix ← sort(submatrix(Matrix[:, 2], 1, last(Matrix[:, 2]), 0, 0))
    N ← 1
    if length(N_NDMatrix) > 1
        for j ∈ 1 .. last(Matrix[:, 2]) - 1
            N ← N + (str2num(substr(N_NDMatrix[j], 0, 1)) ≠ str2num(substr(N_NDMatrix[j - 1], 0, 1)))
L_Component(Matrix) :=
    N_NDMatrix ← sort(submatrix(Matrix[:, 2], 1, last(Matrix[:, 2]), 0, 0))
    N ← 1
    if length(N_NDMatrix) > 1
        for j ∈ 1 .. last(Matrix[:, 2]) - 1
            N ← N + (str2num(substr(N_NDMatrix[j], 0, 1)) ≠ str2num(substr(N_NDMatrix[j - 1], 0, 1)))
    L_Matrix ← sort(submatrix(Matrix[:, 1], 1, last(Matrix[:, 1]), 0, 0))
    k ← 0
    j ← 0
    while k < N - 1
        L[k, 0] ← num2str(str2num(L[k, 0]) + str2num(L_Matrix[j]))
        L[k, 1] ← substr(N_NDMatrix, 0, 1)
        j ← j + 1
        k ← k + (N_NDMatrix[j] ≠ N_NDMatrix[j - 1])
    L
i ← 0
while i < N - 1
    a[i] ← □
L_Component(WaterLevelMeasurement) =  # error: This value must be a matrix.
for i ∈ 0 .. last(Matrix[:, 1]) - 1
    L ← L + str2num(submatrix(Matrix[:, 1], 1, last(Matrix[:, 1]), 0, 0)[i])*m*str2num(submatrix(Matrix[:, 0], 1, last(Matrix[:, 0]), 0, 0)[i])*m
N_NDMatrix := sort(submatrix(WaterLevelMeasurement[:, 2], 1, last(WaterLevelMeasurement[:, 2]), 0, 0))
N_NDMatrix = ["3in ND Caps"; "3in ND ThinWallPipe"; "4in ND Coupling"; "4in ND Pipe"]
L_Test(WaterLevelMeasurement) =  # error: This variable is undefined.
last(WaterLevelMeasurement[:, 2]) - 1 = 3
str2num(substr(N_NDMatrix[1], 0, 1)) ≠ str2num(substr(N_NDMatrix[0], 0, 1)) = 0
length(N_NDMatrix) = 4
L_Component(Matrix) :=
    for i ∈ 0 .. last(Matrix[:, 1]) - 1
        L ← L + str2num(submatrix(Matrix[:, 1], 1, last(Matrix[:, 1]), 0, 0)[i])*m*str2num(submatrix(Matrix[:, 0], 1, last(Matrix[:, 0]), 0, 0)[i])*m
    L
