# [reference: MasterProgram.xmcd]
# New Entrance tank design
# Assumptions:
AN_EtSlope := 60 deg  # angle of the slopes of the entrance tank pyramids
H_EtTotTarget := 1.5 m  # this is the estimated total height of the entrance tank to ensure easy access to chinmey stops
L_Et := 2/3*L_Sed = 8.85318 m
# The length of the entrance tank is set to 2/3 the length of
# the flocculator because this is the point where the operator
# can see flocs form.
# disregard pyramid area when calculating velocities
EN_LinearFlow := 1  # 1 if using Lfom, zero if using nonlinear system
# Tank Design:
W_EtCapture := Q_Plant/(L_Et*8*mm/s) = 0.310623 m  # the minimum width required to ensure a capture velocity of 8mm/s
# ensures that the width is at least big enough that a human
# can fit inside and construct the entrance tank
W_Et := max(45 cm, W_EtCapture) = 0.45 m
# height of the top part of the entrance tank required to ensure that the velocity in the entrance tank is no greater than that in the flocculator
H_EtTopEst := S_FlocBaffle[0]*W_FlocChannel/W_Et + H_PlantFreeboard = 0.409562 m
H_EtPyramidEst := H_EtTotTarget - H_EtTopEst = 1.09044 m  # estimated height of the pyramids
W_EtPyramidEst := 2*H_EtPyramidEst/tan(60 deg) = 1.25913 m  # estimated width of a pyramid
N_Pyramids := floor(L_Et/W_EtPyramidEst) = 7  # the number of pyramids in the entrance tank
W_EtPyramid := L_Et/N_Pyramids = 1.26474 m  # actual width of the pyramid - will change if we add vertical trash racks after the first pyramid
H_EtPyramid := W_EtPyramid/2*tan(60 deg) = 1.0953 m  # actual height of the pyramid
H_EtTotEst := H_EtPyramid + H_EtTopEst = 1.50486 m  # total height of the entrance tank
# Pipe Elevations:
Z_MicroMix := Z_SedWeirExit
# Linear case
Z_LfomOrifices := Z_MicroMix + HL_PlantTotal + 10 cm  # elevation of the bottom orifices of the LFOM
# Non Linear Case
Z_PipeGap := Z_MicroMix + HL_PlantTotal  # elevation of the gap between pipes that the water flows through
# Drain Design:
Q_EtPyramid := Q_Plant/N_Pyramids  # estimates the flow out of each pyramid
K_EtDrains := 2*K_El90 + K_PipeExit
# the water is effectively making two 90 degree turns: one through the tee/elbow at the bottom of the pyramid, and another through the elbow dumping into the drain channel
HL_EtPipeDrainEst :=
    Z_PipeGap if EN_LinearFlow == 0
    Z_LfomOrifices otherwise
# estimate the head loss as Z.LfomOrifices or Z.PipeGap depending on whether
# linear or nonlinear
ND_EtDrain := D_pipeschedule(Q_EtPyramid, EN_PipeSpec, HL_EtPipeDrainEst, L_Sed, Nu_Water, E_Pvc, K_EtDrains) = 0.0508 m
# estimate the length as L.Sed for now - will change depending on
# what side the drain channel is on
H_EtTop :=
    H_EtTopEst if H_EtTopEst ≥ (ElbowRadius(ND_EtDrain) + ConRadius(ND_EtDrain) + SocketDepth(ND_EtDrain) + H_PlantFreeboard + 15 cm) and EN_LinearFlow == 1
    (ElbowRadius(ND_EtDrain) + ConRadius(ND_EtDrain) + SocketDepth(ND_EtDrain) + H_PlantFreeboard + 15 cm) if H_EtTopEst < ElbowRadius(ND_EtDrain) + ConRadius(ND_EtDrain) + SocketDepth(ND_EtDrain) + H_PlantFreeboard + 15 cm and EN_LinearFlow == 1
    H_EtTopEst if H_EtTopEst ≥ (ElbowRadius(ND_EtDrain) + ConRadius(ND_EtDrain) + SocketDepth(ND_EtDrain) + H_PlantFreeboard + 55 cm) and EN_LinearFlow == 0
    (ElbowRadius(ND_EtDrain) + ConRadius(ND_EtDrain) + SocketDepth(ND_EtDrain) + H_PlantFreeboard + 55 cm) otherwise
# ensures that the top part of the tank can fit the elbow that directs to micromixing
# (unless we don't mind drawing that elbow into the pyramid??)
# assumes height of pipe for flow meter for nonlinear case is 40cm
H_EtTot := H_EtTop + H_EtPyramid = 1.50486 m
Z_EtBottom :=
    (Z_PipeGap - ElbowRadius(ND_EtDrain) - ConRadius(ND_EtDrain) - H_EtPyramid - SocketDepth(ND_EtDrain) - H_PlantFreeboard - 15 cm) if EN_LinearFlow == 0
    (Z_LfomOrifices - ElbowRadius(ND_EtDrain) - ConRadius(ND_EtDrain) - H_EtPyramid - SocketDepth(ND_EtDrain) - H_PlantFreeboard - 15 cm) otherwise
# sets the bottom of the entrance tank such that the top part (just above the pyramid) is 10 cm below the elbow that directs to micromixing
Z_EtBottom = 0.676826 m
