# AguaClara Water Treatment Plants
# Automated Design
# Add variable descriptions next to every varible so it is easy to interpret what this all means.
# Design References
# [reference: BasicInputs3Sed1Bay.xmcd]
# Use BasicClientInputs and ExpertClientInputs when this is run by LabVIEW.
# Use BasicInputs and ExpertInputs to use the program in MathCAD
# Change the reference by
# - right clicking
# - select properties
# - reference tab
# - type in the correct file name
# [reference: ExpertInputs.xmcd]
# [reference: DesignAssumptions.xmcd]
# [reference: MathFunctions.xmcd]
# [reference: PipeDatabase.xmcd]
# [reference: MinorLossCoefficients.xmcd]
# [reference: FluidsFunctions.xmcd]
# [reference: Sedimentation Tank.xmcd]
# [reference: Floc Hopper - New Design.xmcd]
# [reference: FCM.xmcd]
# [reference: Flocculator 3.xmcd]
# [reference: RapidMixer.xmcd]
# [reference: EntranceTankDim.xmcd]
# [reference: Materials List.xmcd]
Q_Plant = 70 L/s
N_SedTanks = 3
W_ExitChannelMin = 0.128 m
W_SedBay = 1 m
N_SedBays = 2
# Sed Tanks and Slopes:
Geom_ExitChannel = 1
B_SedPort = 4.05235 cm  # Height of the narrowest part of the manifold ports
N_SedTanks = 3
W_SedPort = 4.05235 cm
H_SedBetween = 0 cm  # Distance from the top of the inlet manifold to the bottom of the ledge supporting the lamella frame
A_SedPort = 16.4215 cm^2  # Port Area
L_Sed = 14.4 m
W_SedSludgeFlat = 5 cm  # Distance between tips of manifold plates (space alloted for the drain holes
N_SedBays = 2  # Number of bays of inlet manifolds in each sed tank
AN_SedTopInlet = 60 deg  # Angle of the top of the inlet manifold
L_SedPort = 4.67925 cm  # Length of the port through which water exits the inlet manifold
AN_SedBottom = 10 deg  # Angle of the bottom of inlet manifold
W_SedSlopePlate = 30 cm  # Width of ferrous cement plates in whice one manifold port is cut
Q_SedBay = 11.6667 L/s
W_SedBayActual = 0.925 m
L_SedSlopeManifold = 0.805718 m  # This is the extra distance between the last slope and the wall
# Sedimentation Tank Sludge Drain:
N_SedSludgeOrifices = 96  # per cell
Ti_SludgeDrain = 30 min  # Tank Drain time
W_SedSludge = 21.8513 cm  # Width of the sludge channel
B_SedSludgeOrifices = 15 cm  # Distance center to center between drain orifices
H_SedSludge = 10.9256 cm  # Depth of the sludge channel
T_SedSludge = 6 cm
T_SedSludge = 6 cm
# Thickness of the plate topping the sludge channel
# through which drain holes are formed
W_SedDrainCover = 26.8513 cm
D_SedSludgeOrifice = 0.014 m  # Diameter of drain orifices
W_SedInletBottom = 0.328244 m
N_SedSludgeOrifices = 96
ND_SedSludgeValve = 4 in
# Sedimentation Tank Dimensions:
Z_SedSludge = 0.169256 m  # Height from 0 of the top of the sludge drain
H_SedBottomSlope = 0.0666267 m  # Height of the bottom slope
H_SedTopSlope = 0.697772 m  # Height of the top of the inlet manifold
Z_SedSlopes = 0.867029 m  # Height from 0 of the top of the inlet manifold
W_Sed = 2 m  # Total tank wall height
L_Sed = 14.4 m  # Total tank length
# Inlet Channel:
HW_InletChannel = 0.617653 m  # Width of the drop chimneys connecting channel to sed inlet manifolds
W_InletChannel = 0.796653 m  # length of drop chimmneys
L_Channel = 6.6 m
W_SedManifoldEntrance = 0.314 m
L_SedManifoldEntrance = 0.175844 m
H_SedManifoldPort = 0.390097 m  # Ports at bottom of inlet chimney are set to be triangles
W_SedManifoldPort = 0.301259 m
N_SedInletPipes = 2  # per sed bay
H_InletChannel = 0.717653 m
# Sedimentation Tank Effluent Launder:
N_SedLaunderOrifices = 252  # Number of orifices per launder
Q_SedLaunderOrifices = 2.31481e-5 m^3/s  # More Launder Dimensions
ND_SedLaunder = 8 in
B_SedLaunderOrifices = 0.1 m  # Center to center launder spacing
L_SedLaunder = 13.1398 m
# Exit Channel:
D_SedLaunderOrifice = 0.275591 in
W_ExitChannel = 0.313543 m
H_ExitChannel = 0.717653 m
L_ExitChannel = 6.6 m
H_PltWeir = 0.480157 m  # height of the weir carrying water to the distribution tank
HW_ExitChannel = 0.577653 m  # water height in exit channel from 0
# Lamella:
L_SedPlate = 0.332509 m
B_SedPlate = 2.05495 cm  # center to center distance between lamella
S_SedPlate = 1.7 cm  # spacing between lamella
N_SedPlates = 542  # Number of Sed Plates per Sedimentation Tank Bay.
AN_SedPlate = 60 deg
ZW_ExitChannel = 1.47058 m
V_SedC = 9.72479 m/day
L_SedActive = 10.946 m
T
V_SedUp = 70 m/day
Z_SedLaunder = 1.36105 m
H_SedPlate = 0.287961 m
H_SedAbove = 0.259075 m  # Height of water needed above the lamella
N_SedPlates = 542
HW_Sed = 1.51058 m
H_Sed = 1.61058 m
Z_Mp = 0.892932 m
N_SedPorts = 44
H_SedBayDivider = 0.867029 m
W_SedSlopePlateRemaining = 1.2 m
W_SedBayDivider = 0.15 m
# Sedimentation Tank Floc Hopper:
A_FlocHopper =  # error: This variable is undefined.
L_FlocHopper = 0.925 m  # Length of the hopper cement plate
L_FlocHopperOffset = 0.166255 m  # distance from the edge of the channel to the bottom of the first lamella (collection distance)
W_FlocHopper = 0.05 m  # width of the hopper set within each bay
# Flow Controller:
N_Fcm = 8
ID_FcmTube = 4.318 mm
ID_FcmTube = 0.17 in
L_FcmTube = 245.295 cm
Q_FcmTubeMax = 393.75 mL/min
HL_FcmValve = 28.8045 cm
# Flocculator: | Look at Flocculator Positioning arrays
W_FlocChannel = 1.76693 m
# Fill last channel with bafffles from last channel
# Fix port width to be based on energy dissipation in that channel
ED_Floc = [20; 2] mW/kg
# Adjust spacing after the number of baffles per channel is known.
# Check the residence time of the flocculator should be at least 20minutes
HW_FlocEnd = 1.51058 m
X_FlocBaffles = [
    0.217857, 0.846653;
    0.475714, 1.40789;
    0.733571, 1.96913;
    0.991429, 2.53037;
    1.24929, 3.0916;
    1.50714, 3.65284;
    1.765, 4.21408;
    2.02286, 4.77532;
    2.28071, 5.33656;
    2.53857, 5.89779
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] m
L_FlocBaffles = [
    1.29273, 1.43229;
    1.75203, 0.972985;
    1.29273, 1.43229;
    1.75203, 0.972985;
    1.29273, 1.43229;
    1.75203, 0.972985;
    1.29273, 1.43229;
    1.75203, 0.972985;
    1.29273, 1.43229;
    1.75203, 0.972985
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] m
Z_FlocBaffles = [
    0, 0.5376;
    0.217857, 0;
    0, 0.5376;
    0.217857, 0;
    0, 0.5376;
    0.217857, 0;
    0, 0.5376;
    0.217857, 0;
    0, 0.5376;
    0.217857, 0
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] m
N_FlocChannels = 2
L_FlocTank = 28.8 m
HL_Floc = 35.9304 cm
HW_FlocStart = 1.86989 m
S_FlocBaffle = [21.7857; 53.76] cm
B_FlocBaffle = [25.7857; 57.76] cm
N_FlocChannelBaffles = [55; 24]
W_FlocPort = [0.167857; 0.4876] m
HL_FlocChannels = [3064.75; 528.287] cm
L_FlocBaffleLower = [1.29273; 0.972985] m
L_FlocBaffleUpper = [1.75203; 1.43229] m
H_FlocPort = [2.29324; 1.94811] m
Ti_Floc = 18.3023 min  # residence time of the flocculator
N_FlocBaffles = 79
# Rapid Mix Unit and Entrance Tank:
L_Et = 2.93939 m
W_Et = 2.93939 m
H_Et = 2.26989 m  # Height of Entrance Tank Orifice
W_EtOrifice[30] = 0.031 m
L_trueET[30] = 1.8097 m  # Length of Entrance Tank Orifice
Pi_EtFlow[30] = 0.278388  # Ratio of the minimum flow divided by the maximum flow through the plant.
L_FlocEntryOrifice = 176.693 cm  # Length of orifice entering into flocculator from Rapid Mix Unit
W_FlocEntryOrifice = 3.89785 cm  # Height of orifice entering into flocculator
ED_Diffusion =  # error  # Minimum Energy Dissipation needed
HL_FlocEntryOrifice = 7.86025 cm  # Head loss caused by entering flocculation tank.
A_FlocEntry = 0.0688721 m^2
A_EtOrifice = 561.006 cm^2
HW_EtTotal =  # error  # Total Height of water at beginning of rapid mix unit
HW_Channel2 =  # error  # Height of water at the back of the entrance tank channel (from channel bottom)
HW_EtChannel = 14.2459 cm  # Height of Waterfall into flocculator
W_EtChannel = 21.7857 cm  # Widt of entrance tank channel
Vol_Stock = 5670 L  # Volume of chemical stock tanks
ZW_ExitChannel = 1.47058 m  # Water Level at the end of the plant in the exit channel and exit channel box
HW_Sed = 1.51058 m
HW_FlocStart = 1.86989 m  # Water level at the beginning of the floc tank
HL_Floc = 35.9304 cm  # just for ref. the head loss throught the floc tank
HW_EtTotal =  # error  # Height of the water in the entrance channel
# Materials List:
L_LaunderPipe =  # error
N_Launders = 12
L_LaunderPipeTotal = 157.678 m
N_Valves = 6
N_LaunderCouplings = 12
N_ValveCouplings = 6
N_SedPlatesTotal = 3252
N_SedPlatesPerSheet = 11
N_SedPlateSheets = 296
N_PipeSedPlateStand =  # error
A_SedTank =  # error
# [reference: AutoCADMasterProgram.xmcd]
# AutoCAD References
AC_SedTank =  # error
AC_EntranceTank = [
    "-layer m entrancetank";
    "c t 214,214,214";
    "entrancetank";
    "  ";
    "_-view o t _zoom w 0.16,10.12385,0 -3.09939,13.38324,2.26989 _box 0,10.28385,0 -2.93939,13.22324,2.26989 _box 0.15,10.13385,-0.15 -3.08939,13.37324,2.26989 _subtract 0.15,10.13385,-0.15  0,10.28385,0 ";
    "-layer s 0";
    "  ";
    "-layer f entrancetank";
    "  ";
    "-layer s entrancetank";
    "  ";
    "_box -2.93939,10.13385,2.21989 -2.72153,10.28385,2.26989";
    "-layer s 0";
    "  ";
    "-layer t entrancetank";
    "  ";
    "_-view o t";
    "_subtract 0.15,10.28385,0  -2.93939,10.13385,2.21989 ";
    "-layer f entrancetank";
    "  "
]
AC_FlocTank = [
    "-layer m floctank"; "c t 91,91,91"; "floctank"; "  "; "_-view o t _zoom w 0.16,6.29,0 -14.56,10.29385,1.96989 _box 0,6.45,0 -14.4,10.13385,1.96989 _box 0.15,6.3,-0.15 -14.55,10.28385,1.96989 _subtract 0.15,6.3,-0.15  0,6.45,0 "; "-layer s 0"; "  "; "-layer f floctank"; "  "; "-layer m floctankwall"
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]
