# Reference Master Program
# [reference: MasterProgram.xmcd]
couplingscript(o, outerradiusocket, outerradius, innerradiussocket, innerradius, L, L_socket) :=
    zoom ← zoom_win([o[0] - outerradiusocket; o[1] + outerradiusocket; o[2]], [o[0] + outerradiusocket; o[1] - outerradiusocket; o[2]])
    cylinder1 ← cylinderC(o, outerradius, -L)
    cylinder3 ← cylinderC([o[0]; o[1]; o[2]], outerradiusocket, L_socket)
    cylinder4 ← cylinderC([o[0]; o[1]; o[2] - zc], innerradiussocket, L_socket + zc)
    subtract2 ← subtractD([o[0] - outerradiusocket; o[1]; o[2]], [o[0] - innerradiussocket; o[1]; o[2]])
    union1 ← union_allA
    cylinder2 ← cylinderC([o[0]; o[1]; o[2] - L - zc], innerradius, L + L_socket + 2*zc)
    zoom ← zoom_win([o[0] - outerradiusocket; o[1] + outerradiusocket; o[2]], [o[0] + outerradiusocket; o[1] - outerradiusocket; o[2]])
    subtract1 ← subtractD([o[0] - outerradius; o[1]; o[2]], [o[0] - innerradius; o[1]; o[2]])
    one ← stack(zoom, cylinder1, cylinder3, cylinder4, subtract2, union1, cylinder2, zoom, subtract1)
    return one
# Draw outside of pipe
# Draw outside of socket
# Draw inside of socket
# Subtract inner socket from outer socket
# Draw inner pipe
# Subtract inner pipe from outer pipe
# Pipesizes matrix with columns switched so that the Nominal Pipe Size can be called with a given Outer Diameter.
Pipesizescoupling := [
    .405 in, 1/8*in;
    .540 in, 1/4*in;
    .675 in, 3/8*in;
    .840 in, 1/2*in;
    1.050 in, 3/4*in;
    1.315 in, 1 in;
    1.66 in, 1.25 in;
    1.9 in, 1.5 in;
    2.375 in, 2 in;
    2.875 in, 2.5 in;
    3.5 in, 3 in;
    4 in, 3.5 in;
    4.5 in, 4 in;
    5.563 in, 5 in;
    6.625 in, 6 in;
    8.625 in, 8 in;
    10.75 in, 10 in;
    12.75 in, 12 in;
    14 in, 14 in;
    16 in, 16 in;
    18 in, 18 in;
    20 in, 20 in;
    24 in, 24 in
]
Pipesizes := [
    1/8*in, .405 in;
    1/4*in, .540 in;
    3/8*in, .675 in;
    1/2*in, .840 in;
    3/4*in, 1.050 in;
    1 in, 1.315 in;
    1.25 in, 1.66 in;
    1.5 in, 1.9 in;
    2 in, 2.375 in;
    2.5 in, 2.875 in;
    3 in, 3.5 in;
    3.5 in, 4 in;
    4 in, 4.5 in;
    5 in, 5.563 in;
    6 in, 6.625 in;
    8 in, 8.625 in;
    10 in, 10.75 in;
    12 in, 12.75 in;
    14 in, 14 in;
    16 in, 16 in;
    18 in, 18 in;
    20 in, 20 in;
    24 in, 24 in
]
vlookup(10.75 in, Pipesizescoupling, 1) = [10] in
a := vlookup(10.75 in, Pipesizescoupling, 1)[0] = 0.254 m
size := 12.75 in
Pipesizescoupling[index(size), 1] =  # error: This program has no return value. You must account for all cases when using conditional statements in a Mathcad program.
couplingIDpipe(o, ID_pipe, L, EN) := couplingscript([o[0]; o[1]; o[2] - SocketDepth(ID_pipe)], ElbowRadius(NominalDiameter(ID_pipe, EN))/2, outerradius(NominalDiameter(ID_pipe, EN)), outerradius(NominalDiameter(ID_pipe, EN)), NominalDiameter(ID_pipe, EN)/2, L, SocketDepth(ID_pipe))  # error: This variable is undefined.
couplingIDsocket(o, ID_socket, L, EN) := couplingscript([o[0]; o[1]; o[2] - SocketDepth(Pipesizescoupling[index(ID_socket), 0])], ElbowRadius(Pipesizes[index(ID_socket), 0]), outerradius(Pipesizes[index(ID_socket), 0]), outerradius(Pipesizes[index(ID_socket), 0]), NominalDiameter(Pipesizes[index(ID_socket), 0], EN)/2, L, SocketDepth(Pipesizes[index(ID_socket), 0]))  # error: This variable is undefined.
Pipesizescoupling[index(4 in), 1] = 4 in
Pipesizes[index(4 in), 1] = 4.5 in
Pipesizes[index(4 in), 0] = 4 in
Pipesizes[index(5 in), 1] = 5.563 in
match(4 in, Pipesizes) = [[12; 0]; [11; 1]]
NominalDiameter(0.152 m, 2) = 0.1524 m
# L is T.wall-L.socket+IH.cap
vlookup(8.625 in, Pipesizescoupling, 1) = [8] in
