# Reference master program
# Pipescript is the main function that creates the list of commands. The function was created by drawing the rapid mixer in AutoCAD and translating that sequence of commands into a text file. That text file was then used as the basis for this function. Pipescript creates rows of text for each command and then stacks them together. The sequence is: draw the outer cylinder for the pipe, draw the inner cylinder for the pipe, subtract the inner from the outer, draw the connector, rotate, draw one set of elements, rotate, and then draw the set of perpendicular elements.
elbowscript(p1, p2, p3, p4, p5, p6, p7, p8, p9, p10, p11, p12, p13, p14, p15, p16, p17, p18, R1, R2, R3, R4, H1, win1, win2) :=
    viewtop ← viewtop
    zoom_win ← zoom_wina(win1, win2)
    torus_big ← torus(p1, R1, R2)
    box1 ← box(p2, p3)
    subtract1 ← subtractD(p4, p1)
    torus_small ← torus(p1, R1, R3)
    subtract2 ← subtractA(p4, p5)
    box2 ← box(p6, p7)
    subtract3 ← subtractD(p8, p1)
    outercylinder ← cylinderB(p9, R4, p10)
    innercylinder ← cylinderB(p9, R2, p10)
    subtract4 ← subtractH(p11, p12, p13)
    mirror ← mirrorA(p14, p15, p16)
    bigunion ← bigunion_elbow(p1, p17, p18, R1, R2)
    one ← concat(viewtop, zoom_win, torus_big, box1, sp, subtract1)
    two ← concat(torus_small, subtract2, box2, sp, subtract3)
    three ← concat(outercylinder, innercylinder, subtract4)
    four ← concat(mirror, bigunion)
    return stack(one, two, three, four)
# Command Explanations:
# viewtop: orients the drawing properly
# outercylinder: draws a cylinder with the specified diameter plus pipe wall thickness
# innercylinder: draws a cylinder with the specified diameter
# zoom: zooms extents to allow for proper selection for subtraction
# subtract: subtracts the inner cylinder from the outer cylinder to form a pipe
# connector: draws a cylinder with the specified connector diameter
# viewleft: changes the viewport. This effectively rotates the pipe to draw the elements more easily.
# elementone: draws a cylinder to form the first element with specified diameter and length equal to the inner diameter.
# number: finds the number of elements. Halves these elements because there are two sets of elements.
# copyone: copies the first element and displaces it in increasing increments of Δxelem
# viewfront: changes the viewport. This effectively rotates the pipe to draw the elements perpendicular to the first set.
# elementtwo: draws a cylinder to form the second element with specified diameter and length equal to the inner diameter.
# copytwo: copies the second element and displaces it in increasing increments of  Δxelements
# shade: gourad shades the drawing
# stack: stacks the commands to be placed into a text file to form the AutoCAD script
elbow(o, ND, EN) := elbowscript([o[0]; o[1]; o[2]], [
    o[0] - (ElbowRadius(ND) + ConRadius(ND));
    o[1] - (ElbowRadius(ND) + ConRadius(ND));
    o[2] - (outerradius(ND) + SocketDepth(ND))
], [o[0]; o[1] + ElbowRadius(ND) + ConRadius(ND); (o[2] + outerradius(ND)) + SocketDepth(ND)], [o[0] + ElbowRadius(ND) + outerradius(ND); o[1]; o[2]], [o[0] - ElbowRadius(ND) - innerD(ND, EN)/2; o[1]; o[2]], [o[0]; o[1] - ElbowRadius(ND) - outerradius(ND) - zc; o[2] - ConRadius(ND)], [o[0] + ElbowRadius(ND) + outerradius(ND) + zc; o[1]; o[2] + ConRadius(ND)], [o[0]; o[1] + ElbowRadius(ND); o[2]], [o[0]; o[1] + ElbowRadius(ND); o[2]], [o[0] - SocketDepth(ND); o[1] + ElbowRadius(ND); o[2]], [o[0]; o[1] + ElbowRadius(ND) - ConRadius(ND); o[2]], [o[0] - SocketDepth(ND) - zc; o[1] + ElbowRadius(ND) - outerradius(ND); o[2]], [o[0] + zc; o[1] + ElbowRadius(ND) + outerradius(ND); o[2]], [o[0] - SocketDepth(ND); o[1] + ElbowRadius(ND) - ConRadius(ND); o[2]], [o[0]; o[1]], [o[0] + zc; o[1] + zc], [o[0] + ElbowRadius(ND); o[1] - SocketDepth(ND); o[2]], [o[0] - SocketDepth(ND); o[1] + ElbowRadius(ND); o[2]], ElbowRadius(ND), outerradius(ND), innerD(ND, EN)/2, ConRadius(ND), SocketDepth(ND), [o[0] - ElbowRadius(ND) - ConRadius(ND) - zc; o[1] - ElbowRadius(ND) - ConRadius(ND) - zc; o[2]], [o[0] + ElbowRadius(ND) + ConRadius(ND) + zc; o[1] + ElbowRadius(ND) + ConRadius(ND) + zc; o[2]])
# a | b | c | d | e | f | g | h | i | j | k | l | m
# n | o | p | q | r
elbow([0 m; 0 m; 0 m], 6 in, 4) =  # error: This variable is undefined.
elbow := elbow([0 m; 0 m; 0 m], 6 in, 4)
ND := 1 in
# [component: inputs elbow]
ElbowRadius(ND) =  # error
outerradius(ND) =  # error
