# [reference: MasterProgram.xmcd]
# [reference: PipeDatabase.xmcd]
capscript(o, outerradiuscap, innerradiuscap, IH_cap) :=
    zoom ← zoom_win([o[0] - outerradiuscap; o[1] + outerradiuscap; o[2]], [o[0] + outerradiuscap; o[1] - outerradiuscap; o[2]])
    cylinder1 ← cylinderC([o[0]; o[1]; o[2]], outerradiuscap, IH_cap)
    cylinder2 ← cylinderC([o[0]; o[1]; o[2]], innerradiuscap, IH_cap + zc)
    subtract1 ← subtractD([o[0] - outerradiuscap; o[1]; o[2]], [o[0] - innerradiuscap; o[1]; o[2]])
    topcylinder ← cylinderC([o[0]; o[1]; o[2] + IH_cap], outerradiuscap, outerradiuscap - innerradiuscap)
    union1 ← union_allA
    one ← stack(zoom, cylinder1, cylinder2, subtract1, topcylinder, union1)
    return one
cap(o, ID_pipe, EN) := capscript([o[0]; o[1]; o[2]], CapDiameter(NominalPipeSize(ID_pipe))/2, outerradius(NominalPipeSize(ID_pipe)), CapHeight(NominalPipeSize(ID_pipe)) - (CapDiameter(NominalPipeSize(ID_pipe))/2 - outerradius(NominalPipeSize(ID_pipe))))
cap([0; 0; 0], 4 in, 2) = ["_zoom w -0.06429,0.06429,0 0.06429,-0.06429,0"; "_cylinder 0,0,0 0.06429 0.07223"; "_cylinder 0,0,0 0.05715 0.08223"; "_subtract -0.06429,0,0  -0.05715,0,0 "; "_cylinder 0,0,0.07223 0.06429 0.00714"; "_union all "]
testcap := cap([0; 0; 0], 4 in, 2)
# [component: inputs testcap]
