C_clay := 10*mg/L
C_alum := 20*mg/L
d_maxfloc := 10 mm
# Shear strength of aluminum hydroxide floc. Estimated to be approximately 0.8 Pa from both floc model and rapid sand filter model. We will use a value of 2 Pa for the homework assignment
τ_AlOH3 := 0.6 Pa
## Lots of constants
α := 0.5
# α is a constant used to increase the time required per collision. It could represent a constant of proportionality that was missing from the dimensional analysis or it could represent the efficiency of attachment.
ρ_clay := 2650*kg/m^3
ρ_H2O := 1000*kg/m^3
ν := 1*10^-6*m^2/s
d_clay := 3.5 μm
Al := 27*gm/mol
S := 32.064*gm/mol
O := 16*gm/mol
H := 1.008*gm/mol
MW_alum := 2*Al + 3*(S + 4*O) + 14.3*(2*H + O)
MW_alum = 599.821 gm/mol  # Al2(SO4)3*14.3H2O
MW_AlOH3 := Al + 3*(O + H)
# Given alum dose find alum hydroxide concentration
C_AlOH3 := C_alum/MW_alum*2*MW_AlOH3 = 5.20315 mgm/L
Mole_Al(C_alum) := C_alum/MW_alum*2
## Model Equations
ϕ_floc(C_clay, C_alum, ρ_clay) := C_clay/ρ_clay + 120*L/mole*Mole_Al(C_alum)  # Letterman and Iyer (1985) from Water Quality and Treatment page 6.55
V_sphere(d_floc) := π*d_floc^3/6
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n_floc(C_clay, C_alum, ρ_clay, d_floc) := ϕ_floc(C_clay, C_alum, ρ_clay)/V_sphere(d_floc)
n_clay(C_clay, d_clay) := C_clay/(ρ_clay*V_sphere(d_clay))
Nclayperfloc(C_clay, C_alum, ρ_clay, d_floc, d_clay) := n_clay(C_clay, d_clay)/n_floc(C_clay, C_alum, ρ_clay, d_floc)
# This is the number of clay particles per floc
d_initialfloc(ρ_clay, C_clay, C_alum, d_clay) := (ϕ_floc(C_clay, C_alum, ρ_clay)*ρ_clay/C_clay)^(1/3)*d_clay
d_initialfloc(ρ_clay, C_clay, C_alum, d_clay) = 44.9737 μm
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D_floc(ρ_clay, C_clay, C_alum, d_clay, collisions) := d_initialfloc(ρ_clay, C_clay, C_alum, d_clay)*(2^collisions)^(1/3)
t_collision(C_clay, C_alum, ρ_clay, G, α) := 1/(α*G*ϕ_floc(C_clay, C_alum, ρ_clay))
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n_collisions(C_clay, C_alum, ρ_clay, d_floc, d_clay) := log(Nclayperfloc(C_clay, C_alum, ρ_clay, d_floc, d_clay))/log(2)
C_Dtransition(Re) := 24/Re + 3/sqrt(Re) + 0.34  # drag coefficient for a sphere in the transition region between laminar flow and fully turbulent flow
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G_max(ρ_clay, C_clay, C_alum, d_clay, τ_AlOH3, collisions) :=
    D ← D_floc(ρ_clay, C_clay, C_alum, d_clay, collisions)
    G_prev ← 1000/s
    error ← 1
    while error > 0.001
        G_new ← 1/D*sqrt(8*τ_AlOH3/(ρ_H2O*C_Dtransition(G_prev*D^2/(2*ν))))
        error ← |G_new - G_prev|/mean(G_new, G_prev)
        G_prev ← G_new
    return G_new
Gθ(C_clay, C_alum, ρ_clay, d_clay, d_maxfloc, τ_floc, α, collisions) :=
    Gθ ← 0
    for i ∈ 0 .. collisions
        G ← G_max(ρ_clay, C_clay, C_alum, d_clay, τ_floc, i)
        Gθ ← Gθ + G*t_collision(C_clay, C_alum, ρ_clay, G, α)
    return Gθ
θ(C_clay, C_alum, ρ_clay, d_clay, d_maxfloc, τ_floc, α, collisions) :=
    θ ← 0 s
    for i ∈ 0 .. collisions
        G ← G_max(ρ_clay, C_clay, C_alum, d_clay, τ_floc, i)
        θ ← θ + t_collision(C_clay, C_alum, ρ_clay, G, α)
    return θ
collisions := 0 .. ceil(n_collisions(C_clay, C_alum, ρ_clay, d_maxfloc, d_clay))
G_maxdesignparametric(τ_AlOH3, α) :=
    for i ∈ 0 .. ceil(n_collisions(C_clay, C_alum, ρ_clay, d_maxfloc, d_clay))
        G_maxdesign[i] ← G_max(ρ_clay, C_clay, C_alum, d_clay, τ_AlOH3, i)
    return G_maxdesign
Gθ_design(τ_AlOH3, α) :=
    for i ∈ 0 .. ceil(n_collisions(C_clay, C_alum, ρ_clay, d_maxfloc, d_clay))
        Gθ_design[i] ← Gθ(C_clay, C_alum, ρ_clay, d_clay, d_maxfloc, τ_AlOH3, α, i)
    return Gθ_design
G_maxdesign(Gθ, τ_AlOH3, α) := linterp(Gθ_design(τ_AlOH3, α), G_maxdesignparametric(τ_AlOH3, α), Gθ)
Gθ_max(τ_AlOH3, α) := Gθ(C_clay, C_alum, ρ_clay, d_clay, d_maxfloc, τ_AlOH3, α, ceil(n_collisions(C_clay, C_alum, ρ_clay, d_maxfloc, d_clay)))
G_maxdesign(Gθ_max(0.61 Pa, 0.3), 0.61 Pa, 0.3) = 8.50532 1/s
# Design Curve
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Gθ_max(τ_AlOH3, α) = 6245.19
