## Flocculator Design (baffle spacing, flow obstacles, and head loss)
# [reference: FluidsFunctions.xmcd]
# [reference: Flocculation model.xmcd]
# This model is not correct yet. Many of the equations need to be rederived. The head loss equation is wrong. The equations for G and Gθ need to be checked.
# Disclaimer
# The floc strength model that is used as a primary input to this design is untested.It includes a series of assumptions including a constant floc volume fraction based on a alum dose, a floc strength that is independent of floc size, and a floc drag coefficient in a velocity gradient that is similar to the drag coefficient for a sphere in uniform flow.
# The energy dissipation rate caused by flow obstacles is based on dimensional analysis and could easily be off by a factor of 2 or more.
# The idea of using obstacles to create more uniform energy dissipation throughout the flocculator has only been minimally tested.
# The effect of having a long section at the end flocculator with a constant low shear level may cause large flocs to form and then be broken. The optimal Gθ has not yet been determined.
#
# This model may be relevant to the design of sweep floc with relatively high alum dosages, but it is probably not appropriate for the design of charge neutralization flocculation at low alum dosages. The lower floc volume fractions for this case would likely require a higher Gθ.
## User selected values
Currentpopulation := 3500
Annualgrowth := 3 %
Designlife := 20 yr
Designpopulation := Currentpopulation*(1 + Annualgrowth)^(Designlife/yr) = 6321.39
Q_percapita := 129*L/day
Q_percapita = 34.0782 gal/day
Q_design := Q_percapita*Designpopulation = 149.598 gal/min
Q_design = 566.291 L/min
# maximum design flow
Q_ratio := 0.5  # minimum design flow over design flow
h_floctank := 200 cm  # depth of water at the effluent of the floc tank
w_baffle := 42*in/2  # width of the flocculator
freeboard := 5 cm  # height of the baffles above the highest water surface including that due to head loss
# α is a constant used to increase the time required per collision. It could represent a constant of proportionality that was missing from the dimensional analysis or it could represent the efficiency of attachment. It directly affects the required Gθ.
# [component: outputs Obstacletype]
# [component: outputs n_spacings]
# number of different spacings between baffles
α := 0.63
n_spacings = 3
τ_AlOH3 := 1.2 Pa
# Shear strength of aluminum hydroxide floc. Estimated to be approximately 0.8 Pa from both floc model and rapid sand filter model. It directly affects the allowable velocity gradient.
## Functions and constants
ε := 0.12 mm
ν := 1*10^-6*m^2/s
K_180 := 3  # The head loss coefficient for a 180 turn
C_d :=
    2 if Obstacletype == 1
    1 otherwise
C_d = 1
# This creates the same energy loss behind the obstacles as is caused by the U turns
Π_D := ((2*K_180 + C_d)/K_180 - sqrt(((2*K_180 + C_d)/K_180)^2 - 4))/2 = 0.565741
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# This is the length scale of the energy dissipation behind the obstacles. ratio of the obstacle spacing to the distance between baffles.
# I don't think this is calculated correctly for flat plates since the energy dissipation rate was based on cylinders.
Π_cellold := K_180*(Π_D*(1 - Π_D)^3)/0.06 = 2.3165
Π_cell := 2  # Assume length scale of dissipation is two times the smallest dimension of flow
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# Find the spacing between the baffles for each section
b(G_max, Q, w, ν, Π_D) := 1/sqrt(G_max)*(Q/w)^(3/4)*(K_180/(2*ν*Π_cell))^(1/4)
# I need an equation for G given spacing
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G(Q, b, w, h, ν, ε, K) := (Q/(w*b))^(3/2)*sqrt(K/(2*ν*b*Π_cell))
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# Gθ for one baffle
Gθ_baffle(Q, b, w, ν, ε, K, N) := N*sqrt(K*Q*Π_cell/(2*ν*w))
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G_maxasbuilt(Q, b, w, ν, K_cell, Π_cell) := (Q/(w*b))^(3/2)*sqrt(K_cell/(2*ν*b*Π_cell))
## Main program
flocdesign(Q_design, Q_ratio, Gθ_design, G_maxdesign, w, h, ν, ε, K, n_spacings, Π_cell, Obstacletype) :=
    Gθ_spacing ← Gθ_max(τ_AlOH3, α)/n_spacings
    Gθ_cumulativelowflow[0] ← 0
    Gθ_cumulativehighflow[0] ← 0
    for i ∈ 0 .. n_spacings - 1
        G_max ← G_maxdesign(Gθ_spacing*(i + 1), τ_AlOH3, α)
        b_baffle[i] ← b(G_max, Q_design, w, ν, Π_D)
        N_obstacles[i] ← max([floor((h - 1.5*b_baffle[i])/(Π_cell*b_baffle[i])); 1]) if Obstacletype ≠ 0
        N_obstacles[i] ← 1 otherwise
        Gθ_lowflow ← Gθ_baffle(Q_design*Q_ratio, b_baffle[i], w, ν, ε, K, N_obstacles[i])
        Gθ_highflow ← Gθ_baffle(Q_design, b_baffle[i], w, ν, ε, K, N_obstacles[i])
        G_lowflow[i] ← G(Q_design*Q_ratio, b_baffle[i], w, h, ν, ε, K)
        G_highflow[i] ← G(Q_design, b_baffle[i], w, h, ν, ε, K)
        h_lowflow[i] ← G_lowflow[i]^2*ν*Π_cell*w*N_obstacles[i]*b_baffle[i]^2/(g*Q_design*Q_ratio)
        h_highflow[i] ← G_highflow[i]^2*ν*Π_cell*w*N_obstacles[i]*b_baffle[i]^2/(g*Q_design)
        N[i] ← floor((Gθ_spacing*(i + 1) - Gθ_cumulativehighflow[i])/Gθ_highflow) if i < n_spacings - 1
        N[i] ← ceil((Gθ_spacing*(i + 1) - Gθ_cumulativelowflow[i])/Gθ_lowflow) otherwise
        Gθ_cumulativelowflow[i + 1] ← Gθ_cumulativelowflow[i] + N[i]*Gθ_lowflow
        Gθ_cumulativehighflow[i + 1] ← Gθ_cumulativehighflow[i] + N[i]*Gθ_highflow
    return [
        b_baffle/m;
        N;
        Gθ_cumulativelowflow;
        Gθ_cumulativehighflow;
        G_lowflow*s;
        G_highflow*s;
        h_lowflow/m;
        h_highflow/m;
        N_obstacles - 1
    ]
# find Gmax at the end of the Gθ interval that I am designing for
# find the baffle spacing in that interval
# find G, headloss, and Gθ at the minimum and maximum flow rate
# find the number of obstacles that could be added between baffles. Note taht the number of obstacles includes the 180 bend within the program and then is reduced by 1 at the end of the program to represent the actual number of additional obstacles that need to be added.
# find the number of baffles required in a section of baffles with the same spacing based on the high flow. This will give too small a Gθ for the low flow. Remedy that by having an exception for the last baffle spacing. Use the low flow to figure out how many baffles are required in that spacing.
# I also keep track of cumulative Gθ for both low and high flows
# I return all of the interesting parameters in a big array
# This N.obstacles includes the 180 degree bend
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# round down to avoid going above the G.max line
## More analysis
myflocdesign := flocdesign(Q_design, Q_ratio, Gθ_design, G_maxdesign, w_baffle, h_floctank, ν, ε, K_180, n_spacings, Π_cell, Obstacletype)
i := 0 .. n_spacings - 1
b_baffle := myflocdesign[0]*m
# 0.  b baffle spacing
# Number of baffles per section
# Gθcumulative at low flow
# Gθcumulative at high flow
# G low flow
# G high flow
# head loss per baffle low flow
# head loss per baffle high flow
# number of obstacles per baffle
n_baffles := myflocdesign[1]  # number of baffles in each section
n_bafflestotal := sum(n_baffles) = 31
Gθ_lowflow := myflocdesign[2] = [0; 1140.41; 2280.82; 5050.39]
G_highflow := myflocdesign[5]/s
Gθ
G_lowflow := myflocdesign[4]/s
sectionlength[i] := m*myflocdesign[0][i]*myflocdesign[1][i]
tanklength := sum(sectionlength)
N_obstacles := myflocdesign[8]
Residencetime := sum(sectionlength)*h_floctank*w_baffle/Q_design = 16.9719 min
bafflespersection =  # error: This variable is undefined.
headloss[i] := myflocdesign[7][i]*myflocdesign[1][i]*m
totalheadloss := sum(headloss)
# Now create a plot of the water level in the tank as a function of location. Assume the effluent elevation is h.floctank m and that the inlet elevation is thus higher by the amount of head loss.
bafflearray(myflocdesign, h) :=
    k ← 0
    x[k] ← 0 m
    headloss[k] ← 0 m
    for i ∈ 0 .. last(myflocdesign[1])
        for j ∈ 1 .. myflocdesign[1][i]
            k ← k + 1
            x[k] ← x[k - 1] + myflocdesign[0][i]*m
            headloss[k] ← headloss[k - 1] + myflocdesign[7][i]*m
            b[k] ← myflocdesign[0][i]*m
    headloss ← headloss[k] - headloss + h
    return [x; headloss; b]
# This function finds the starting position for each baffle and the cumulative head loss for each baffle
x := [0; 0]
y := [0; h_floctank - 1.5*b_baffle[0]]  # xy pairs for the first baffle
k := 0 .. 2
j := 0 .. n_bafflestotal
# ranges used to index over the pairs of data used to define the lines for each baffle. I thought i would range from 0 to 1, but apparently it needs to range from 0 to 2 so there is an "empty" point that causes the lines not to be plotted connecting the baffles. (try it!)
X[j] := x + bafflearray(myflocdesign, h_floctank)[0][j]
Y[j] := [
    mod(j, 2)*1.5*bafflearray(myflocdesign, h_floctank)[2][j];
    h_floctank + (mod(j, 2)*(totalheadloss + freeboard)) - mod(j + 1, 2)*1.5*bafflearray(myflocdesign, h_floctank)[2][j]
]
## Drawing Obstacles
objects(objecttype, n_spacings, b_baffle, n_baffles, Π_cell, N_obstacles) :=
    N ← 1 if objecttype == 1
    N ← 40 otherwise
    pimultiplier ← 2 if objecttype == 3
    pimultiplier ← 1 otherwise
    Obs ← -1
    x ← 0 cm
    bafflenumber ← -1
    for s ∈ 0 .. n_spacings - 1
        D ← b_baffle[s]*Π_D
        cumx ← cumx + b_baffle[s - 1]*n_baffles[s - 1] if s > 0
        cumx ← 0 cm otherwise
        for ii ∈ 0 .. N
            α[ii] ← pimultiplier*π*ii/N
            obx[ii] ← D/2*cos(α[ii])
            oby[ii] ← D/2*sin(α[ii])
        for i ∈ 0 .. n_baffles[s] - 1
            bafflenumber ← bafflenumber + 1
            x ← (i + 1/2)*b_baffle[s] + cumx
            y ← 0.5*b_baffle[s]
            if N_obstacles[s] > 0
                for j ∈ 0 .. N_obstacles[s] - 1
                    Obs ← Obs + 1
                    y ← y + Π_cell*b_baffle[s]
                    OBX[Obs] ← obx + x
                    OBY[Obs] ← oby*(-1)^bafflenumber + y
    return [OBX/m; OBY/m; Obs; N]
Objectsresults := objects(Obstacletype, n_spacings, b_baffle, n_baffles, Π_cell, N_obstacles)
OBX := Objectsresults[0]*m
ii := 0 .. Objectsresults[2]
OBY := Objectsresults[1]*m
kk := 0 .. Objectsresults[3] + 1
Objectsresults[3] = 40
Gθ := 0, 100 .. Gθ_max(τ_AlOH3, α)
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n_bafflestotal = 31
tanklength = 9.00924 m
Residencetime = 16.9719 min
totalheadloss = 3.95311 cm
b_baffle = [11.6416; 18.4393; 40.6093] cm
n_baffles = [7; 7; 17]
N_obstacles = [0; 0; 0]
G_highflow = [150.403; 59.9506; 12.3604] 1/s
V := Q_design/(b_baffle*w_baffle) = [0.151992; 0.09596; 0.0435723] m/s
G_lowflow = [53.1754; 21.1957; 4.37008] 1/s
Area := 0.805 m^2
V := Q_design/Area = 0.0117245 m/s
