# Flocculation Function
# References:
# [reference: DesignAssumptions.xmcd]
# This function calculates the size of the hole between the two channels in the flocculator. The function is called below by the flocculator function. (Note: this function will NOT work for any number of flocculator channels or baffle spacings)
uturnhole(baffle_spacing, FlocTank_width, FlocTank_length, n_baffle, lastbafflespacing) :=
    uturnhole_area ← lastbafflespacing*m*FlocTank_width
    uturnhole_width ← baffle_spacing[1]*m - uturnhole_unusedspace if FlocTank_length/n_channels > baffle_spacing[0]*m*n_baffle[0]
    uturnhole_width ← baffle_spacing[0]*m - uturnhole_unusedspace otherwise
    uturnhole_height ← uturnhole_area/uturnhole_width
    return [uturnhole_width; uturnhole_height]
# The area of the hole should be equal to the flow area (baffle spacing x tank width) of the last baffle. This guarantees that the shear through this hole is not going to break up flocs. It is assumed that the baffle spacing at the beginning of the second channel is either the first or second spacing size. The width of the u turn hole cannot be greater than this baffle spacing. There should be some space around the hole that is solid (ie the hole should not extend all the way from the end of the channel to the baffle). After finding the width of the hole, the height of it should be set to make the hole the desired area. This function returns the dimensions of the hole. (Note: We are putting the hole in the center of the wall, but how should the location be ouputted?)
uturnhole([.1; .3; .5], .5*m, 15*m, [30; 20; 5], .5) = [0.285; 0.877193] m
# This function checks to see if shortcircuiting, (due to the large baffle spacing) will be a problem at the end of the tank. The function is called below by the flocculator function. (Note: this function will work for any number of flocculator channels and baffle spacings)
shortcircuit(baffle_spacing, FlocTank_enddepth) :=
    gap ← spacingratio*baffle_spacing*m
    baffle_length ← FlocTank_enddepth - gap
    baffle_overlap ← FlocTank_enddepth - 2*gap
    spacingratio_new ← (FlocTank_enddepth - overlap_min)/(2*baffle_spacing*m)
    i ← 0
    while i < length(baffle_spacing)
        baffle_length[i] ← FlocTank_enddepth - spacingratio_new[i]*baffle_spacing[i]*m if baffle_overlap[i] < overlap_min
        i ← i + 1
    return baffle_length
# Short circuiting will occur when the total space above or below adjacent baffles is approximately the same as the water depth of the flocculator. In other words, when 3b = h. If short circuiing has occured, it means adjacent baffles no longer overlap and the water can go straight through the center of the tank, rather than around the baffles.
# Typically, the space above or below a baffle (gap) is equal to spacingratio*bafflespacing. In this function, spacingratio is equal to 1.5. Therefore the length of the baffle is the water height minus gap (assuming no head loss). The overlap between adjacent baffles would then be determined by the water depth minus 3*baffle spacing). If this overlap is less than 2 cm (design assumption), a new gap ratio (less than 1.5) should be used. This ratio should be set to guarentee an overlap of 2 cm.  This function caclulates the new spacing ratio and then uses a loop to check for short circuiting at all baffle spacings. If necessary it changes the baffle length and returns a new vector of the lengths at each spacing.
shortcircuit([.1; .3; .75], 2.1*m) = [1.95; 1.65; 1.06] m
# This function creates a matrix for two channels (if needed) giving the x and y coordinates of each baffle. The function is called below by the flocculator function. (Note: this function will NOT work for any number of flocculator channels). This function is called when the length needed by the baffles is greater than a single channel length.
bafflepositions_2channels(flocDim, n_baffles, b_lengths, b_spacings) :=
    n ← 0
    k ← 0
    h ← 0
    j ← 0
    firstchannel ← 1
    length_perchannel ← flocDim[0]/n_channels
    while n ≤ sum(n_baffles) - 1
        if j > n_baffles[k] - 1 and k ≠ 2
            k ← k + 1
            j ← 0
        if firstchannel == 1
            baffle_xposition1[n] ← b_spacings[k] if n == 0
            baffle_xposition1[n] ← baffle_xposition1[n - 1] + b_spacings[k] otherwise
            if baffle_xposition1[n] > length_perchannel - b_spacings[k]
                baffle_xposition1 ← submatrix(baffle_xposition1, 0, n - 1, 0, 0)
                firstchannel ← 0
                n ← n - 1
                m ← 0
        if firstchannel == 0
            baffle_xposition2[m] ← length_perchannel - b_spacings[k] if m == 0
            baffle_xposition2[m] ← baffle_xposition2[m - 1] - b_spacings[k] otherwise
        m ← m + 1
        n ← n + 1
        j ← j + 1
    if baffle_xposition2[m - 1] ≥ 2*b_spacings[k]
        while baffle_xposition2[m - 1] ≥ 2*b_spacings[k]
            baffle_xposition2[m] ← baffle_xposition2[m - 1] - b_spacings[k]
            h ← h + 1
            m ← m + 1
    otherwise
        while baffle_xposition2[m - 1] < b_spacings[k]
            baffle_xposition2 ← submatrix(baffle_xposition2, 0, m - 2, 0, 0)
            h ← h - 1
            m ← m - 1
    numbaffles ← length(baffle_xposition2) + length(baffle_xposition1)
    p ← 1
    y ← 0
    t ← 0
    n_bafflesfirst ← n_baffles[0]
    n_bafflesthird ← n_baffles[2] + h
    n_bafflessecond ← numbaffles - (n_bafflesfirst + n_bafflesthird)
    n_bafflesnew ← [n_bafflesfirst; n_bafflessecond; n_bafflesthird]
    while t ≤ numbaffles - 1
        if p > n_bafflesnew[y]
            y ← y + 1
            p ← 1
        bafflelength[t, 0] ← b_lengths[y]
        p ← p + 1
        t ← t + 1
    firstchannel ← 1
    m ← 0
    i ← 0
    while i < length(baffle_xposition1)
        j ← 0
        if mod(i + 1, 2) == 0
            while j < 3
                baffleposition1[i, j] ← baffle_xposition1[i] if j == 0
                baffleposition1[i, j] ← 0 if j == 1
                baffleposition1[i, j] ← bafflelength[i] if j == 2
                j ← j + 1
            i ← i + 1
        otherwise
            while j < 3
                baffleposition1[i, j] ← baffle_xposition1[i] if j == 0
                baffleposition1[i, j] ← flocDim[2] if j == 1
                baffleposition1[i, j] ← flocDim[2] - bafflelength[i] if j == 2
                j ← j + 1
            i ← i + 1
    while m < length(baffle_xposition2)
        j ← 0
        if mod(i + 1, 2) ≠ 0
            while j < 3
                baffleposition2[m, j] ← baffle_xposition2[m] if j == 0
                baffleposition2[m, j] ← flocDim[2] if j == 1
                baffleposition2[m, j] ← flocDim[2] - bafflelength[i] if j == 2
                j ← j + 1
            i ← i + 1
            m ← m + 1
        otherwise
            while j < 3
                baffleposition2[m, j] ← baffle_xposition2[m] if j == 0
                baffleposition2[m, j] ← 0 if j == 1
                baffleposition2[m, j] ← bafflelength[i] if j == 2
                j ← j + 1
            i ← i + 1
            m ← m + 1
    baffle_positions ← [baffleposition1, baffleposition2]
    numbafflesin2 ← length(baffle_xposition2)
    lastbafflespacing ← baffle_xposition2[numbafflesin2 - 2] - baffle_xposition2[numbafflesin2 - 1]
    return [baffle_positions, length(bafflelength), n_bafflesnew, lastbafflespacing]
# initializes variables and assigns initial values
# the length of each channel is equal to the length of one sed tank
# this while loop finds the x position of each baffle (x=0 at start of tank)
# this if statement determines what baffle spacing should be used to find the position of the next baffle. k (0,1,2) will be equal to the current baffle spacing and increments after all the baffles of a specific spacing have been assigned an x value.
# first assign the x positions for the baffles in channel 1
# for the first baffle, the position is just equal to the baffle spacing. The positions of the rest of the baffles are equal to the position of the previous baffle plus the baffle spacing.
# This if statement makes sure that the baffle that was just assigned an x position is not too close to the wall at the end of the channel (ie, closer than a baffle spacing). If it is too close this baffle is taken out and reassigned in the next channel.
# Now the x positions of the second channel are calculated. The x positions are still relative to a datum set at the start of the FIRST channel, however the positions are determined from the start of THIS channel to the end of THIS channel (ie backwards). The first baffle is at a position equal to the tank length minus the baffle spacing and the rest of the baffle have an x coordinated equal to the position of the previous baffle minus baffle spacing.
# increments the counter variables
# This loop adds baffles if the length of the channel is longer than baffle spacing * number of baffles. The baffles added have a spacing equal to the last baffle spacing. A baffle should be added if the space left is greater than 2*baffle spacing. This will ensure that the space between the wall and the last baffle is greater than or equal to the desired baffle spacing. This loop adds as many baffles as are needed. h keeps track of how many baffles are added or subtracted
# This loop takes out baffles if the length of the channel is shorter than baffle spacing * number of baffles. The baffles are taken out of the last section. A baffle needs to be taken out if the space between it and the wall is less than the desired baffle spacing. This loops takes out all extra baffles.
# initializes variables and sets initial values
# These statements create a new vector of the number of baffles per section. It is assumed that no baffles in the first section were removed (based on testing of the code this is a valid assumption). It then determines how many baffles are left in the third spacing based on the number added or removed above. Finally, it calculates the number of baffles in the second section based on the total number of baffles in the tank minus the number of baffles in section 1 and 3.
# This loop creates a vector of baffle lengths
# checks to see what spacing (and thereby what length) each baffle is
# increments counter variables
# initializes variables and sets initial values
# this loop assigns three coordinates for each baffle in the 1st channel. The first column is the x coordinate and the 2nd and 3rd columns are the starting and ending points (y coordinates) of a baffle. Note: The first baffle always starts at the floor and extends upward. The datum for the y coordiante is set at the water level with down as the positive direction.
# an even numbered baffle gets these coordinates. These baffles extend from the top of the tank downward.
# an odd numbered baffle gets these coordinates. These baffles extend from the bottom of the tank upward.
# this loop assigns three coordinates for each baffle in the 2nd channel
# an odd numbered baffle gets these coordinates. These baffles extend from the bottom of the tank upward.
# an even numbered baffle gets these coordinates. These baffles extend from the top of the tank downward.
# increments counter variables
# This function returns 2 matrices (one for each channel) with the coordinates for each baffle. This will be used by the autoCAD team to draw the baffles. It also return the total number of baffles in the tank and the number of baffles per baffle spacing.
bafflepositions_2channels([14.426; 0.534; 2.169], [16; 4; 2], [1.612; 1.234; 0.99], [0.232; 0.484; 0.685]) = [[[
    0.232, 2.169, 0.557;
    0.464, 0, 1.612;
    0.696, 2.169, 0.557;
    0.928, 0, 1.612;
    1.16, 2.169, 0.557;
    1.392, 0, 1.612;
    1.624, 2.169, 0.557;
    1.856, 0, 1.612;
    2.088, 2.169, 0.557;
    2.32, 0, 1.612;
    2.552, 2.169, 0.557;
    2.784, 0, 1.612;
    3.016, 2.169, 0.557;
    3.248, 0, 1.612;
    3.48, 2.169, 0.557;
    3.712, 0, 1.612;
    4.196, 2.169, 0.935;
    4.68, 0, 1.234;
    5.164, 2.169, 0.935;
    5.648, 0, 1.234;
    6.333, 2.169, 0.935
], [
    6.528, 0, 0.99;
    5.843, 2.169, 1.179;
    5.158, 0, 0.99;
    4.473, 2.169, 1.179;
    3.788, 0, 0.99;
    3.103, 2.169, 1.179;
    2.418, 0, 0.99;
    1.733, 2.169, 1.179;
    1.048, 0, 0.99
]], 30, [16; 5; 9], 0.685]
# This function creates a matrix for two channels (if only one is needed) giving the x and y coordinates of each baffle. The function is called below by the flocculator function. (Note: this function will NOT work for any number of flocculator channels). This function is called when the length needed by the baffles is less tha than a single channel length.
bafflepositions_1channel(flocDim, n_baffles, b_lengths, b_spacings) :=
    k ← 0
    j ← 0
    firstchannel ← 1
    length_perchannel ← flocDim[0]/n_channels
    baffle_xposition1[0] ← b_spacings[k]
    n ← 1
    while baffle_xposition1[n - 1] < length_perchannel - (2*b_spacings)[2]
        if j > n_baffles[k] - 1 and k ≠ 2
            k ← k + 1
            j ← 0
        baffle_xposition1[n] ← baffle_xposition1[n - 1] + b_spacings[k] if firstchannel == 1
        n ← n + 1
        j ← j + 1
    baffle_xposition2[0] ← length_perchannel - b_spacings[k]
    m ← 1
    while baffle_xposition2[m - 1] ≥ 2*b_spacings[k]
        baffle_xposition2[m] ← baffle_xposition2[m - 1] - b_spacings[k]
        m ← m + 1
    numbaffles ← length(baffle_xposition2) + length(baffle_xposition1)
    p ← 1
    y ← 0
    t ← 0
    n_bafflesnew ← [n_baffles[0]; n_baffles[1]; numbaffles - n_baffles[0] - n_baffles[1]]
    while t ≤ numbaffles - 1
        if p > n_bafflesnew[y]
            y ← y + 1
            p ← 1
        bafflelength[t, 0] ← b_lengths[y]
        p ← p + 1
        t ← t + 1
    firstchannel ← 1
    m ← 0
    i ← 0
    while i < length(baffle_xposition1)
        j ← 0
        if mod(i + 1, 2) == 0
            while j < 3
                baffleposition1[i, j] ← baffle_xposition1[i] if j == 0
                baffleposition1[i, j] ← 0 if j == 1
                baffleposition1[i, j] ← bafflelength[i] if j == 2
                j ← j + 1
            i ← i + 1
        otherwise
            while j < 3
                baffleposition1[i, j] ← baffle_xposition1[i] if j == 0
                baffleposition1[i, j] ← flocDim[2] if j == 1
                baffleposition1[i, j] ← flocDim[2] - bafflelength[i] if j == 2
                j ← j + 1
            i ← i + 1
    while m < length(baffle_xposition2)
        j ← 0
        if mod(i + 1, 2) ≠ 0
            while j < 3
                baffleposition2[m, j] ← baffle_xposition2[m] if j == 0
                baffleposition2[m, j] ← flocDim[2] if j == 1
                baffleposition2[m, j] ← flocDim[2] - bafflelength[i] if j == 2
                j ← j + 1
            i ← i + 1
            m ← m + 1
        otherwise
            while j < 3
                baffleposition2[m, j] ← baffle_xposition2[m] if j == 0
                baffleposition2[m, j] ← 0 if j == 1
                baffleposition2[m, j] ← bafflelength[i] if j == 2
                j ← j + 1
            i ← i + 1
            m ← m + 1
    baffle_positions ← [baffleposition1, baffleposition2]
    return [baffle_positions, length(bafflelength), n_bafflesnew]  # initializes the variables
# the length of each channel is the total length divided by the number of channels
# the position of the first baffle in the first channel is equal to the first baffle spacing
# This loop continues to place baffles in the first channel until there is no room left (ie there is less than 2 times the biggest baffle spacing free at the end of the channel). If fewer baffles are needed than the length of the tank it places extra ones at the biggest spacing.
# This if statement checks to see which baffle spacing should be used
# This places the first baffle in the second channel at a x location of the length of the channel minus the biggest baffle spacing.
# This loop places the rest of the baffles in the second channel (all at the biggest baffle spacing). It starts where the water comes in  (ie at x = channel length) and ends where the water exits the flocculation (ie at x = 0).
# This determines the number of baffles in the tank
# initializes counter variables
# finds a new matrix of baffles per baffle spacing. It is assumed that the first two spacings have the same number of baffles as predicted, howerver, the third spacing should have more. Therefore, the number of baffles in the third section is equal to the total number of baffles minus the number of baffles in sections 1 and 2.
# This loop creates a vector of baffle lengths
# checks to see what spacing (and thereby what length) each baffle is
# increments counter variables
# initializes variables and sets initial values
# this loop assigns three coordinates for each baffle in the 1st channel. The first column is the x coordinate and the 2nd and 3rd columns are the starting and ending points (y coordinates) of a baffle. Note: The first baffle always starts at the floor and extends upward. The datum for the y coordiante is set at the water level with down as the positive direction.
# an even numbered baffle gets these coordinates. These baffles extend from the top of the tank downward.
# an odd numbered baffle gets these coordinates. These baffles extend from the bottom of the tank upward.
# this loop assigns three coordinates for each baffle in the 2nd channel
# an odd numbered baffle gets these coordinates. These baffles extend from the bottom of the tank upward.
# an even numbered baffle gets these coordinates. These baffles extend from the top of the tank downward.
# increments counter variables
# This function returns 2 matrices (one for each channel) with the coordinates for each baffle. This will be used by the autoCAD team to draw the baffles. It also return the total number of baffles in the tank and the number of baffles per baffle spacing.
bafflepositions_1channel([15; .5; 2.5], [10; 6; 4], [1.6; 1.3; 1.1], [.1; .3; .5]) = [[[
    0.1, 2.5, 0.9;
    0.2, 0, 1.6;
    0.3, 2.5, 0.9;
    0.4, 0, 1.6;
    0.5, 2.5, 0.9;
    0.6, 0, 1.6;
    0.7, 2.5, 0.9;
    0.8, 0, 1.6;
    0.9, 2.5, 0.9;
    1, 0, 1.6;
    1.1, 2.5, 1.2;
    1.4, 0, 1.3;
    1.7, 2.5, 1.2;
    2, 0, 1.3;
    2.3, 2.5, 1.2;
    2.6, 0, 1.3;
    2.9, 2.5, 1.4;
    3.4, 0, 1.1;
    3.9, 2.5, 1.4;
    4.4, 0, 1.1;
    4.9, 2.5, 1.4;
    5.4, 0, 1.1;
    5.9, 2.5, 1.4;
    6.4, 0, 1.1;
    6.9, 2.5, 1.4
], [
    7, 0, 1.1;
    6.5, 2.5, 1.4;
    6, 0, 1.1;
    5.5, 2.5, 1.4;
    5, 0, 1.1;
    4.5, 2.5, 1.4;
    4, 0, 1.1;
    3.5, 2.5, 1.4;
    3, 0, 1.1;
    2.5, 2.5, 1.4;
    2, 0, 1.1;
    1.5, 2.5, 1.4;
    1, 0, 1.1;
    0.5, 2.5, 1.4
]], 39, [10; 6; 23]]
# This function checks to see if the Gθ value for the flocculator has fallen too low after baffles were removed the fit the flocculator in the tank.
Gθmin_check(baffle_spacing, tot_baffle, n_bafflenew, G_min, θ_min) :=
    newGθ_totalpersection ← vectorize(G_min*θ_min*n_bafflenew)
    newGθ_total ← 0
    for i ∈ 0 .. 2
        newGθ_total ← newGθ_total + newGθ_totalpersection[i] if newGθ_totalpersection[i] > 0
        i ← i + 1
    return [newGθ_totalpersection, newGθ_total]
    return 1 if newGθ_total < Gθ_absmin
    return 0 otherwise  # This recalculates the Gθ for each section based on the number of baffles actually placed at each baffle spacing.
# This calculates the total Gθ for the tank (if all baffles were removed from the final section it would give a negative value and should not be used to find the Gθ for the tank)
# returns a 1 if the new Gθ is less than the minimum required Gθ, requires a 0 otherwise.
Gθmin_check([1.6; 1.3; 1.1], 100, [30; 50; 10], [2000; 4500; 12.341]*1/s, [3.315; 14.482; 28.963]*s) = [[198900; 3258450; 3574.32], 3460924]
# This is the main flocculator function. It is called by the Master Program and returns the necessary outputs to the master program. It calls the subprograms when needed.
flocculator(Q_plant, SedDim) :=
    FlocTank_length ← SedDim[0]*n_channels*m
    FlocTank_width ← SedDim[1]/n_channels*m
    FlocTank_enddepth ← SedDim[2]*m - freeboard_sed
    baffle_spacing ← (1/G)^(1/2)*(k_b*Q_plant^3/(2*Π_cell*ν*FlocTank_width^3))^(1/4)
    G_min ← G*flowratio_hightolowflow^(3/2)
    θ_min ← Π_cell*FlocTank_width*baffle_spacing^2/Q_plant
    Gθ_minpersection ← Gθ_min*G_min/sum(G_min)
    n_baffle ← ceil(vectorize(Gθ_minpersection/(G_min*θ_min)))
    length_duetobaffles ← baffle_spacing*n_baffle
    baffle_length ← shortcircuit(baffle_spacing/m, FlocTank_enddepth)
    v ← Q_plant/(FlocTank_width*baffle_spacing)
    h_l ← vectorize(n_baffle*(k_b*v^2/(2*g)))
    total_hl ← sum(h_l)
    d_start ← FlocTank_enddepth + total_hl
    FlocTank_height ← d_start + freeboard_floc
    floc_dim ← [FlocTank_length; FlocTank_width; FlocTank_height]
    twochannels ← 0
    twochannels ← 1 if length_duetobaffles ≥ FlocTank_length/n_channels - baffle_spacing[2]
    [baffle_positions, tot_baffle, n_bafflesnew] ← bafflepositions_1channel(floc_dim/m, n_baffle, baffle_length/m, baffle_spacing/m) if twochannels == 0
    [baffle_positions, tot_baffle, n_bafflesnew, lastbafflespacing] ← bafflepositions_2channels(floc_dim/m, n_baffle, baffle_length/m, baffle_spacing/m) if twochannels == 1
    uturnhole_dim ← uturnhole(baffle_spacing/m, FlocTank_width, FlocTank_length, n_bafflesnew, lastbafflespacing)
    Gθ_newmin ← Gθmin_check(baffle_spacing, tot_baffle, n_bafflesnew, G_min, θ_min)
    lowGθ ← "Failure: Your Gθ for the flocculator is too low. It should not fall below 4500. Consider increasing the flowrate or flocculator length."
    return lowGθ if Gθ_newmin == 1
    return [floc_dim/m, baffle_spacing/m, tot_baffle, total_hl/m, uturnhole_dim/m, baffle_length/m, baffle_positions, Gθ_newmin, length_duetobaffles/m]
# The length of one channel of the flocculator is equal to the length of a sed tank . Therefore the total length is equal to the number of channels times the length of a sed tank. The width of a flocculator is equal to the width of a sed tank divided by the number of channels (to make "upward velocity" equal in the two tanks. The water depth at the end of the flocculaor must be the same as the water depth in the sed tank.
# calculates the baffle spacing based on desired G value
# calculates the min G value based on the velocity at low flow
# Calculates the minimum residence time for the flocculator
# each baffle spacing is resposible for contributing a certain Gtheta to the tanks total Gtheta. This is caculated based on the ratio between the G of a certain spacing divided by the sum of the G values for all three sections. There will be more baffles at the smaller baffle spacing.
# determines the number of baffles at each spacing based on the Gtheta requirement calculated above.
# determines the length the flocculator would need to be if determined by the number fo baffles and their respective baffle spacings
# calls the function which finds the dimensions of the uturn hole
# calls the function which checks for short circuiting and determines the baffle length for each spacing
# finds the velocity per baffle spacing based on the flow rate and the flow area of each baffle spacing
# calculates the head loss per baffle and then finds the total headloss This headloss calculation is not based on the actual number of baffles at each spacing, but change should be so small that difference in negligible.
# the water height at the end of the tank will be less than the water height at the beginning due to head loss. The tank must be deep enough so that water does not overfloww at the beginning. Additionally, there is 10 cm of free space between the water surface and the top of the tank
# matrix of flocculator dimensions (length, height, width)
# This determines if two channels are actually necessray (alhough two channels are always used). Seperate functions calculate the baffle coordinates in each case.
# This calls the function that finds the coordinates of each baffle.
# This calls the function to check the new Gθ minimum value. The function returns either a 0 (Gθ is ok) or a 1 (Gθ is too low). If a 1 is returned, the function gives an error message to the user
# This function returns: dimensions of the flocculator, baffles spacings, total number of baffles, headloss through the tank, dimensions of the uturn hole, and baffle lengths)
flocculator(400*gpm, [7.213; 1.067; 2.06]) = [[14.426; 0.5335; 2.16932], [0.231674; 0.484216; 0.684785], 30, 0.109325, [0.469216; 0.778602], [1.61249; 1.23368; 0.99], [[
    0.231674, 2.16932, 0.556835;
    0.463348, 0, 1.61249;
    0.695021, 2.16932, 0.556835;
    0.926695, 0, 1.61249;
    1.15837, 2.16932, 0.556835;
    1.39004, 0, 1.61249;
    1.62172, 2.16932, 0.556835;
    1.85339, 0, 1.61249;
    2.08506, 2.16932, 0.556835;
    2.31674, 0, 1.61249;
    2.54841, 2.16932, 0.556835;
    2.78009, 0, 1.61249;
    3.01176, 2.16932, 0.556835;
    3.24343, 0, 1.61249;
    3.47511, 2.16932, 0.556835;
    3.70678, 0, 1.61249;
    4.191, 2.16932, 0.935649;
    4.67521, 0, 1.23368;
    5.15943, 2.16932, 0.935649;
    5.64364, 0, 1.23368;
    6.32843, 2.16932, 0.935649
], [
    6.52822, 0, 0.99;
    5.84343, 2.16932, 1.17932;
    5.15865, 0, 0.99;
    4.47386, 2.16932, 1.17932;
    3.78908, 0, 0.99;
    3.10429, 2.16932, 1.17932;
    2.41951, 0, 0.99;
    1.73472, 2.16932, 1.17932;
    1.04994, 0, 0.99
]], [[3914.86; 1223.39; 2202.11], 7340.36], 7.01321]
# Tamar's Notes:
# 1. Code does not work when I input 100gpm. - in order to test this you need to go through the master program, so your flocculator design is based on actual sed tank dim. the floc function does not fail at 100 gpm when done this way.
# 2. I think that after the correction is applied to change the short circuiting - we remove too much of the baffle length.
# 3. I changed my mind about drawing the baffles, I do think that it would be useful to do. I promise when I get back on Wednesday this will be my priority! The instant feedback is good to see how the number change!
# 4. I think that currently setting the channel length, we should be able to specify to the user a range that the code works for. i can help work on this as well.
