# Fluids Functions
# [reference: FluidsFunctions.xmcd]
# Pipe Database
# [reference: PipeDatabase.xmcd]
# Design Assumptions
# [reference: DesignAssumptions.xmcd]
# Hydraulic Design
# [reference: HydraulicDesign.xmcd]
# Gives an array of the vertical location of each set of holes given hole spacing and the maximum head:
heads(Spacing, Change) :=
    for i ∈ 0 .. Change/Spacing
        h_grit[i] ← i*Spacing
    return h_grit
# This function provides the flow rate for a given head.  Requires an array with hole numbers at each level up to the current head level.
Q(h, n, Orifice_spacing, A_drillbit, K_orifice) :=
    Q ← 0
    return Q if h == 0
    otherwise
        levels ← floor(h/Orifice_spacing)
        Q ← Q + K_orifice*A_drillbit*n[0]*sqrt(2*g*h) if levels == 0
        otherwise
            for i ∈ 0 .. levels - 1
                Q ← Q + K_orifice*A_drillbit*n[i]*sqrt(2*g*(h - Orifice_spacing*i))
        return Q
# This returns an array with the number of holes required to create a linear relationship between flow and depth at each vertical orifice spacing:
N_holes(h_grit, Base, MaxHeadChange, Orifice_spacing, FirstFlow, A_drillbit, K_orifice) :=
    n_holes[0] ← Base
    for p ∈ 1 .. MaxHeadChange/Orifice_spacing - 1
        n_holes[p] ← 0
        while Q(h_grit[p + 1], n_holes, Orifice_spacing, A_drillbit, K_orifice) ≤ FirstFlow*(p + 1)
            n_holes[p] ← n_holes[p] + .1
        n_holes[p] ← round(n_holes[p])
    return n_holes
# This returns an the number of tees, crosses, and elbows in the grit chamber based on the number of risers: this works for any number of risers, but should perhaps be limited somewhere else.
N_components(n_risers) :=
    n_connections ← 0 if n_risers < 4
    n_connections ← (n_risers - 1) if n_risers ≥ 4 and mod(n_risers, 2) ≠ 0
    n_connections ← (n_risers - 2) otherwise
    ends ← n_risers + 1 + n_connections
    n_crosses ← trunc(ends/4)
    left ← ends - 4*n_crosses
    n_tees ← trunc(left/3)
    left ← left - 3*n_tees
    n_straight ← left
    n_elbows ← n_risers
    n_components ← [n_elbows; n_tees; n_crosses]
    return n_components
# Given the number of holes at each vertical orifice spacing above, what are the actual flow rates what art the flow rates when the water reaches just below each set of holes?
Orifice_spacing := 2 cm
OurFlows(h, n, Orifice_spacing, A_drillbit, K_orifice) :=
    for i ∈ 0 .. length(h) - 1
        Flows[i] ← Q(h[i], n, Orifice_spacing, A_drillbit, K_orifice)
    return Flows
D_avail := AvailPipeSizes1(PipeSpecification)
Q_plant := 470*L/min
h_grit := heads(Orifice_spacing, h_lmax)
D_riser(Q_plant) := D_pipe(Q_plant, D_avail, h_lmax, L_rmpipe, ν, ε_pvc, K_sum(0, n_elbowsgrit, 0, n_tgrit, 0, 0, 0, 0, 0))
D_riser(Q_plant) = 4.134 in
n_risers(Q_plant) := ceil(4*A_orifice(h_lorificemax, K_orifice, Q_plant)/(π*D_pipe(Q_plant, D_avail, h_lmax, L_rmpipe, ν, ε_pvc, K_sum(0, n_elbowsgrit, 0, n_tgrit, 0, 0, 0, 0, 0))^2*A_ratio))
Q_ideal(Q_plant, h_grit, h_riser) := h_grit*Q_plant/h_riser
D_metdrill := [
    3 mm;
    4 mm;
    5 mm;
    6 mm;
    7 mm;
    8 mm;
    9 mm;
    10 mm;
    11 mm;
    12 mm;
    13 mm;
    14 mm;
    15 mm;
    16 mm;
    17 mm;
    18 mm;
    19 mm;
    20 mm
]
FirstFlow(Q_plant, h_lmax, Orifice_spacing) := Q_plant/(h_lmax/Orifice_spacing)
D_engdrill := [
    2/16*in;
    3/16*in;
    4/16*in;
    5/16*in;
    6/16*in;
    7/16*in;
    8/16*in;
    9/16*in;
    10/16*in;
    11/16*in;
    12/16*in
]
h_riser := 20 cm
D_drill(DrillSize) :=
    D_engdrill if DrillSize == 1
    D_metdrill otherwise
Q_error := 30
# Initial error between ideal and actual
# flow rates in grit chamber
Max_error = 10
DrillSize := 0
Riser_orifices(Q_plant, DrillSize) :=
    i ← last(D_drill(DrillSize))
    while Q_error > Max_error
        A_drillbit ← π*D_drill(DrillSize)[i]^2/4
        BaseHoles ← round(FirstFlow(Q_plant, h_lmax, Orifice_spacing)/Q_orifice(D_drill(DrillSize)[i], h_lmax, K_orifice))
        n_orifices ← N_holes(h_grit, BaseHoles, h_lmax, Orifice_spacing, FirstFlow(Q_plant, h_lmax, Orifice_spacing), A_drillbit, K_orifice)
        Q_actual ← OurFlows(h_grit, n_orifices, Orifice_spacing, A_drillbit, K_orifice)
        Q_error ← 100*max(|Q_actual - Q_ideal(Q_plant, h_grit, h_riser)|)/Q_plant
        i ← i - 1
        if i < 0
            {
                break
            }
    i - 1 if i == last(D_drill(DrillSize))
    return [D_drill(DrillSize)[i + 1]/m, n_orifices]
D_drill(DrillSize)[3] = 6 mm
Riser_orifices(Q_plant, DrillSize)[:, 0] = [0.003]
Riser_orifices(Q_plant, DrillSize)[:, 1] = [[89; 436; 72; 88; 84; 77; 71; 67; 62; 59]]
AvailPipeSizes(PipeSpecification)[:, 0] = [1.175; 1.512; 1.734; 2.173; 2.635; 3.21; 3.672; 4.134; 5.107; 6.083; 7.921; 9.874; 11.71; 12.924; 14.77; 16.616; 18.462; 22.154] in
grit_width(PipeSpecification) :=
    grit_width ← n_tgrit*TeeLength(D_nominal(D_riser(Q_plant), PipeSpecification)) + n_elbowsgrit*ElbowRadius(D_nominal(D_riser(Q_plant), PipeSpecification))
    D_drum ← 2*r_drum
    grit_width if grit_width > D_drum
    D_drum otherwise
SedTank_level := 2 m
grit_length := 2 m
grit_depth := SedTank_level
gritchamber(Q_plant, PipeSpecification, r_drum) :=
    D_orifice ← Riser_orifices(Q_plant, DrillSize)[:, 0]
    n_risers ← n_risers(Q_plant)
    D_riser ← D_pipe(Q_plant, D_avail, h_lmax, L_rmpipe, ν, ε_pvc, K_sum(0, n_elbowsgrit, 0, n_tgrit, 0, 0, 0, 0, 0))
    n_orifices ← Riser_orifices(Q_plant, DrillSize)[:, 1]
    grit_dim ← [grit_length/m; grit_width(PipeSpecification)/m; grit_depth/m]
    return [grit_dim, n_risers, n_orifices, D_riser/m, D_orifice]
gritchamber(Q_plant, PipeSpecification, r_drum) = [[2; 0.6; 2], 3, [[89; 436; 72; 88; 84; 77; 71; 67; 62; 59]], 0.105004, [0.003]]
# This is not being used in the Master Program, just for reference as of right now!
gritchamber(Q_plant, PipeSpecification, r_drum)
gritchamber2(Q_plant, DrillSize, PipeSpecification) :=
    D_avail ← AvailPipeSizes1(PipeSpecification)
    K_sum ← K_sum(0, n_elbowsgrit, 0, n_tgrit, 0, 0, 0, 0, 0)
    D_riser ← D_pipe(Q_plant, D_avail, h_lmax, L_rmpipe, ν, ε_pvc, K_sum)
    A_orif ← A_orifice(h_lorificemax, K_orifice, Q_plant)
    n_risers ← ceil(4*A_orif/(π*D_riser^2*A_ratio))
    A_drillbit ← π*DrillSize^2/4
    h_grit ← heads(Orifice_spacing, h_lmax)
    FirstFlow ← Q_plant/(h_lmax/Orifice_spacing)
    Q_ideal ← h_grit*Q_plant/h_riser
    D_orifice ← DrillSize
    BaseHoles ← round(FirstFlow/Q_orifice(DrillSize, h_lmax, K_orifice))
    n_orifices ← N_holes(h_grit, BaseHoles, h_lmax, Orifice_spacing, FirstFlow, A_drillbit, K_orifice)
    Q_actual ← OurFlows(h_grit, n_orifices, Orifice_spacing, A_drillbit, K_orifice)
    Q_error ← 100*max(|Q_actual - Q_ideal|)/Q_plant
    Q ← Q(h_lmax, h_grit)
    riser_area ← D_riser^2/4*π
    riser_areaTotal ← riser_area*n_risers
    drum_circumference ← r_drum^2*π
    riser_areaTotal ← drum_circumference if drum_circumference > riser_areaTotal
    grit_length ← sqrt(riser_areaTotal)
    grit_width ← r_drum*2 + sqrt(riser_areaTotal)
    grit_depth ← 2 m
    grit_dim ← [grit_length; grit_width; grit_depth]
    return [grit_dim/m, n_risers, n_orifices, D_riser/m, D_orifice/m]
D_orifice =  # error: This variable is undefined.
