# Hydraulic Design
# References
# Fluids Functions
# [reference: FluidsFunctions.xmcd]
# Pipe Database
# [reference: PipeDatabase.xmcd]
# Design Assumptions
# [reference: DesignAssumptions.xmcd]
# User Inputs
# [reference: UserInputs.xmcd]
# Minor Headlosss Coefficients
# Number of Components
N_elbow45 := 0
N_teebr := 1
N_ReturnBends := 0
N_elbow90 := 2
N_teerun := 0
L_pipe := 7.116 m
PipeSpecification := 8
# Valves Information
GateValve := 1
CheckValveConv := 0
CheckValveBall := 0
GlobeValve := 0
AngleValve := 0
# Pipes and Orifices
K_sum(N_elbow45, K_el45, N_elbow90, K_el90, K_Tflowrun, N_teerun, K_Tflowbr, N_teebr, K_gatevalve, K_globevalve, K_anglevalve, K_chkvalveconv, K_chkvalveball, GateValve, GlobeValve, AngleValve, CheckValveConv, CheckValveBall, diamratio_exp0.75, K_exp0.75, diamratio_exp0.5, K_exp0.5, diamratio_exp0.25, K_exp0.25, diamratio_cont0.75, K_cont0.75, diamratio_cont0.5, K_cont0.5, diamratio_cont0.25, K_cont0.25) :=
    K_2 ← N_elbow45*K_el45 + N_elbow90*K_el90
    K_3 ← K_Tflowrun*N_teerun + K_Tflowbr*N_teebr
    K_4 ← GateValve*K_gatevalve + GlobeValve*K_globevalve + AngleValve*K_anglevalve + CheckValveConv*K_chkvalveconv + CheckValveBall*K_chkvalveball
    K_5 ← diamratio_exp0.75*K_exp0.75 + diamratio_exp0.5*K_exp0.5 + diamratio_exp0.25*K_exp0.25 + diamratio_cont0.75*K_cont0.75 + diamratio_cont0.5*K_cont0.5 + diamratio_cont0.25*K_cont0.25
    K_sum ← K_2 + K_3 + K_4 + K_5
    return K_sum
PipeSize(Q_plant, PipeSpecification, L_pipe) :=
    K_sum ← K_sum(N_elbow45, K_el45, N_elbow90, K_el90, K_Tflowrun, N_teerun, K_Tflowbr, N_teebr, K_gatevalve, K_globevalve, K_anglevalve, K_chkvalveconv, K_chkvalveball, GateValve, GlobeValve, AngleValve, CheckValveConv, CheckValveBall, diamratio_exp0.75, K_exp0.75, diamratio_exp0.5, K_exp0.5, diamratio_exp0.25, K_exp0.25, diamratio_cont0.75, K_cont0.75, diamratio_cont0.5, K_cont0.5, diamratio_cont0.25, K_cont0.25)
    Pipe_size ← D_pipe(Q_plant, AvailPipeSizes1(PipeSpecification), h_lmax, L_pipe, ν, ε_pvc, K_sum)
    return Pipe_size
# Launderer Design
# Diameter iteration program:
D_manifold(Q, h, L, Q_ratio, D_available, ν, ε, K, n) :=
    D_new ← D_available[0]
    D_old ← 0 m
    error ← 1
    while error > 0.01
        D_old ← D_new
        D_new ← (8*Q^2/(g*π^2*h)*(1 + (f(Q, D_old, ν, ε)*L/D_old + K)*(1/3 + 1/(2*n) + 1/(6*n^2)))/(1 - Q_ratio^2))^(1/4)
        error ← |D_old - D_new|/mean(D_old, D_new)
    D_new ← Dnextlargest(D_new, D_available)
    return D_new
D_orifices(h_losslaunder, Q_plant, A_circle, D_launder) :=
    h_sedtank ← 2 m
    D_circle(A_orifice(h_sedtank - h_losslaunder - (Q_plant/2)^2/(2*g*A_circle(D_launder)^2), K_orifice, Q_plant/2/44))
Launder(Q_plant, PipeSpecification, A_orifice) :=
    Q_tank ← Q_plant/n_sedtanks
    L_sedtank ← 5 m
    Q_ratio ← .85
    n_orifices ← L_sedtank/(2*lamella_spacing)
    h_sedtank ← 2 m
    h_platetops ← 1.8 m
    manifold_depth ← h_sedtank - h_platetops - (h_sedtank - h_platetops)/2
    D_avail ← AvailPipeSizes1(PipeSpecification)
    D_launder ← D_manifold(Q_tank, manifold_depth, 2*L_sedtank, Q_ratio, D_avail, ν, ε_pvc, 0, n_orifices)
    h_losslaunder ← h_lmanifold(Q_tank, D_launder, 2*L_sedtank, 0, ν, ε_pvc, n_orifices)
    D_orifice ← D_orifices(h_losslaunder, Q_plant, A_circle, D_launder)
    SedPipe_length ← L_sedtank
    orifice_dist ← lamella_spacing/2
    return [SedPipe_length/m, D_orifice/m, orifice_dist/m, manifold_depth/m]  # How is PipeSpecification determined?
# Q.ratio assumption?
# Sludge Pipe Design
Sludge(Q_plant, PipeSpecification) :=
    Q_tank ← Q_plant/n_sedtanks
    L_sedtank ← 5 m
    Q_ratio ← .85
    n_orifices ← L_sedtank/(2*lamella_spacing)
    h_losslaunder ← 2 cm
    h_sedtank ← 2 m
    h_platetops ← 1.8 m
    manifold_depth ← h_sedtank - h_platetops - (h_sedtank - h_platetops)/2
    D_avail ← AvailPipeSizes1(PipeSpecification)
    D_launder ← D_manifold(Q_tank, manifold_depth, 2*L_sedtank, Q_ratio, D_avail, ν, ε_pvc, 0, n_orifices)
    D_orifice ← D_orifices(h_losslaunder, Q_plant, A_circle, D_launder)
    orifice_dist ← lamella_spacing
    waste_inr ← AvailPipeSizes1(PipeSpecification)
    return [waste_inr/m, D_orifice/m, orifice_dist/m]
# Channel Design
# The average velocity gradient in the cell where the energy
# dissipation is assumed to be occuring. This is the desired
# velocity gradient for the end of the flocculation tank.
Channel(Q_plant, SedTank_width, tank_thick) :=
    G_cell ← 15/s
    K_cell ← 3
    Π_cell ← 2
    w_channel ← 30 cm
    b ← (1/G_cell)^(1/2)*(Q_plant/w_channel)^(3/4)*(K_cell/(2*ν*Π_cell))^(1/4)
    A_opening ← b*w_channel*1.5
    height_opening ← A_opening/w_channel
    width_opening ← w_channel
    length_channel ← 3*SedTank_width + 2*tank_thick
    channel_dim ← [length_channel; width_opening; height_opening]
    return channel_dim
# The loss coefficient for the channel transition.
# The length of the zone where the energy is dissipated. Assume
# that energy is dissipated in a zone is twice as long as the
# smallest dimension flow.
# Width of channel, based on construction constraints?
# Opening of channel height determines the height
# for theentire channel
# Grit Chamber Design
# Maximum water surface elevation in the entrance tank measured from the center of the orifices at the design plant flow rate is Δh_orifice := 20 cm
# Gives an array of the vertical location of each set of holes given hole spacing and the maximum head:
# The pipe sections leading to the flocculator from the vertical pipes with the orifices will have n_elbows := 4 (a few of the elbows may actually be Tees) and each of these 90 degree bends will have a minor loss coefficient of approximately K_elbow := 1 The total pipe length between the orifices and the flocculator (rapid mix pipe) will be approximately L_rmpipe := 2 m.
heads(Spacing, Change) :=
    for i ∈ 0 .. Change/Spacing
        h_grit[i] ← i*Spacing
    return h_grit
# Assume D.orifice = 1.5 in, Korifice=0.63
# This function provides the flow rate for a given head.  Requires an array with hole numbers at each level up to the current head level.
Q(h, n, Orifice_spacing, A_drillbit, K_orifice) :=
    Q ← 0
    return Q if h == 0
    otherwise
        levels ← floor(h/Orifice_spacing)
        Q ← Q + K_orifice*A_drillbit*n[0]*sqrt(2*g*h) if levels == 0
        otherwise
            for i ∈ 0 .. levels - 1
                Q ← Q + K_orifice*A_drillbit*n[i]*sqrt(2*g*(h - Orifice_spacing*i))
        return Q
# This returns an array with the number of holes required to create a linear relationship between flow and depth at each vertical orifice spacing:
N_holes(h_grit, Base, MaxHeadChange, Orifice_spacing, FirstFlow, A_drillbit, K_orifice) :=
    n_holes[0] ← Base
    for p ∈ 1 .. MaxHeadChange/Orifice_spacing - 1
        n_holes[p] ← 0
        while Q(h_grit[p + 1], n_holes, Orifice_spacing, A_drillbit, K_orifice) ≤ FirstFlow*(p + 1)
            n_holes[p] ← n_holes[p] + .1
        n_holes[p] ← round(n_holes[p])
    return n_holes
# Need to determine array of drillbit sizes
gritchamber(Q_plant, DrillSize, r_drum, PipeSpecification) :=
    D_avail ← AvailPipeSizes1(PipeSpecification)
    h_lmax ← 20 cm
    h_lorificemax ← 20 cm
    K_sum ← K_sum(0, K_el45, 4, K_el90, K_Tflowrun, 0, K_Tflowbr, 0, K_gatevalve, 0, K_anglevalve, K_chkvalveconv, K_chkvalveball, 0, 0, 0, 0, 0, diamratio_exp0.75, K_exp0.75, diamratio_exp0.5, K_exp0.5, diamratio_exp0.25, K_exp0.25, diamratio_cont0.75, K_cont0.75, diamratio_cont0.5, K_cont0.5, diamratio_cont0.25, K_cont0.25)
    D_riser ← D_pipe(Q_plant, D_avail, h_lmax, L_rmpipe, ν, ε_pvc, K_sum)
    K_orifice ← 0.63
    A_orif ← A_orifice(h_lorificemax, K_orifice, Q_plant)
    n_risers ← ceil(4*A_orif/(π*D_riser^2*A_ratio))
    Orifice_spacing ← 2 cm
    A_drillbit ← π*DrillSize^2/4
    h_grit ← heads(Orifice_spacing, h_lmax)
    FirstFlow ← Q_plant/(h_lmax/Orifice_spacing)
    D_orifice ← DrillSize
    BaseHoles ← round(FirstFlow/Q_orifice(DrillSize, h_lmax, K_orifice))
    n_orifices ← N_holes(h_grit, BaseHoles, h_lmax, Orifice_spacing, FirstFlow, A_drillbit, K_orifice)
    Q ← Q(h_lmax, n_orifices)
    riser_area ← D_riser^2/4*π
    riser_areaTotal ← riser_area*n_risers
    drum_circumference ← r_drum^2*π
    riser_areaTotal ← drum_circumference if drum_circumference > riser_areaTotal
    grit_length ← sqrt(riser_areaTotal)
    grit_width ← r_drum*2 + sqrt(riser_areaTotal)
    grit_depth ← 2 m
    grit_dim ← [grit_length; grit_width; grit_depth]
    return [L_rmpipe/m, grit_dim/m, n_risers, n_orifices, D_riser/m, D_orifice/m]
# Plant Leveling Tank
PlantLevelingTank(Q_plant, PipeSpecification) :=
    D_avail ← AvailPipeSizes(PipeSpecification)
    lvltank_waterlvl ← 3
    wall_disp ← 3
    depth ← 2
    width ← 2
    length ← 2
    effluent_inr ← 5
    lvltank_dim ← [length; width; depth]
    return [lvltank_waterlvl, wall_disp, lvltank_dim, effluent_inr]
# Plant Elevation Design
PlantElevationDesign(Q_plant, n_sedtanks, sedtank_dim, FlocTank_dim) := 3
HydraulicDesign(Q_plant, FlocTank_dim, PipeSpecification, n_sedtanks, sedtank_dim, tank_thick, channel_thick, r_drum) :=
    Launder(Q_plant, PipeSpecification)[0]
    Launder(Q_plant, PipeSpecification)[1]
    Launder(Q_plant, PipeSpecification)[2]
    Launder(Q_plant, PipeSpecification)[3]
    Sludge(Q_plant, PipeSpecification)[0]
    Sludge(Q_plant, PipeSpecification)[1]
    Sludge(Q_plant, PipeSpecification)[2]
    Channel(FlocTank_dim, tank_thick, channel_thick)
    gritchamber(Q_plant, r_drum, PipeSpecification)[0]
    gritchamber(Q_plant, r_drum, PipeSpecification)[1]
    gritchamber(Q_plant, r_drum, PipeSpecification)[2]
    gritchamber(Q_plant, r_drum, PipeSpecification)[3]
    gritchamber(Q_plant, r_drum, PipeSpecification)[4]
    gritchamber(Q_plant, r_drum, PipeSpecification)[5]
    PlantLevelingTank(Q_plant, PipeSpecification)[0]
    PlantLevelingTank(Q_plant, PipeSpecification)[1]
    PlantLevelingTank(Q_plant, PipeSpecification)[2]
    PlantLevelingTank(Q_plant, PipeSpecification)[3]
    PlantElevationDesign(Q_plant, n_sedtanks, sedtank_dim, FlocTank_dim)  # disabled
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# Hydraulic Design Function
HydraulicDesign(Q_plant, FlocTank_dim, PipeSpecification, n_sedtanks, sedtank_dim, tank_thick, channel_thick, r_drum) := [
    Launder(Q_plant, PipeSpecification)[0];
    Launder(Q_plant, PipeSpecification)[1];
    Launder(Q_plant, PipeSpecification)[2];
    Launder(Q_plant, PipeSpecification)[3];
    Sludge(Q_plant, PipeSpecification)[0, 0];
    Sludge(Q_plant, PipeSpecification)[0, 1];
    Sludge(Q_plant, PipeSpecification)[0, 1];
    Channel(FlocTank_dim, tank_thick);
    1;
    1;
    1;
    1;
    1;
    1;
    PlantLevelingTank(Q_plant, PipeSpecification)[0];
    PlantLevelingTank(Q_plant, PipeSpecification)[1];
    PlantLevelingTank(Q_plant, PipeSpecification)[2];
    PlantLevelingTank(Q_plant, PipeSpecification)[3];
    PlantElevationDesign(Q_plant, n_sedtanks, sedtank_dim, FlocTank_dim)
]  # disabled
