# Hydraulic Design
# References
# Fluids Functions
# [reference: FluidsFunctions.xmcd]
# Pipe Database
# [reference: PipeDatabase.xmcd]
# Constants
ν := 1*10^-6*m^2/s  # The kinematic viscosity of water.
# Used In Grit Chamber Design
A_ratio := 0.3
# The maximum inlet orifice area into a vertical pipe normalized by the pipe area. This prevents the orifice flow from becoming so large that the orifice flows interfere with each other. This estimate is based on experience we have at Ojojona, and may be revised as we build more of these flow measuring devices. The orfices should also be placed on one side of the pipe so that the orifice jets don't impinge on each other.
L_rmpipe := 2 m  # The total pipe length between the orifices and the flocculator (rapid mix pipe) .
# Channel assumptions
Π_cell := 2
# The length of the zone where the energy is dissipated. Assume
# that energy is dissipated in a zone is twice as long as the
# smallest dimension flow.
G_cell := 15/s
# The average velocity gradient in the cell where the energy
# dissipation is assumed to be occuring. This is the desired
# velocity gradient for the end of the flocculation tank.
k_cell := 3  # The loss coefficient for the channel transition.
# Minor Headlosss Coefficients
# Individual K Values | Expansions | Number of Components
N_elbow45 := 0
N_teebr := 1
N_ReturnBends := 0
K_el90 := 0.9
K_Tflowrun := 0.6
K_1 := 0
diamratio_exp0.75 := 0
diamratio_exp0.5 := 0
K_el45 := 0.45
K_Tflowbr := 1.8
K_returnbend := 1.5
N_elbow90 := 2
N_teerun := 0
K_gatevalve := 0.39
K_globevalve := 10
L_pipe := 7.116 m
diamratio_exp0.25 := 0
K_chkvalveconv := 4
PipeSpecification := 8
K_anglevalve := 4.3
K_chkvalveball := 4.5  # Contractions
# Valves Information
K_exp0.75 := 0.18
K_exp0.5 := 0.55
GateValve := 1
diamratio_cont0.75 := 0
diamratio_cont0.5 := 0
CheckValveConv := 0
K_exp0.25 := 0.25
K_cont0.75 := 0.18
CheckValveBall := 0
GlobeValve := 0
K_cont0.25 := 0.43
K_cont0.5 := 0.33
diamratio_cont0.25 := 0
AngleValve := 0
# Pipes and Orifices
K_sum(N_elbow45, K_el45, N_elbow90, K_el90, K_Tflowrun, N_teerun, K_Tflowbr, N_teebr, K_gatevalve, K_globevalve, K_anglevalve, K_chkvalveconv, K_chkvalveball, GateValve, GlobeValve, AngleValve, CheckValveConv, CheckValveBall, diamratio_exp0.75, K_exp0.75, diamratio_exp0.5, K_exp0.5, diamratio_exp0.25, K_exp0.25, diamratio_cont0.75, K_cont0.75, diamratio_cont0.5, K_cont0.5, diamratio_cont0.25, K_cont0.25) :=
    K_2 ← N_elbow45*K_el45 + N_elbow90*K_el90
    K_3 ← K_Tflowrun*N_teerun + K_Tflowbr*N_teebr
    K_4 ← GateValve*K_gatevalve + GlobeValve*K_globevalve + AngleValve*K_anglevalve + CheckValveConv*K_chkvalveconv + CheckValveBall*K_chkvalveball
    K_5 ← diamratio_exp0.75*K_exp0.75 + diamratio_exp0.5*K_exp0.5 + diamratio_exp0.25*K_exp0.25 + diamratio_cont0.75*K_cont0.75 + diamratio_cont0.5*K_cont0.5 + diamratio_cont0.25*K_cont0.25
    K_sum ← K_2 + K_3 + K_4 + K_5
    return K_sum
K_total := K_sum(N_elbow45, K_el45, N_elbow90, K_el90, K_Tflowrun, N_teerun, K_Tflowbr, N_teebr, K_gatevalve, K_globevalve, K_anglevalve, K_chkvalveconv, K_chkvalveball, GateValve, GlobeValve, AngleValve, CheckValveConv, CheckValveBall, diamratio_exp0.75, K_exp0.75, diamratio_exp0.5, K_exp0.5, diamratio_exp0.25, K_exp0.25, diamratio_cont0.75, K_cont0.75, diamratio_cont0.5, K_cont0.5, diamratio_cont0.25, K_cont0.25)
PipeSize(Q_plant, PipeSpecification, h_lmax, K_sum, L_pipe) :=
    Pipe_size ← D_pipe(Q_plant, AvailPipeSizes1(PipeSpecification), h_lmax, L_pipe, ν, ε_pvc, K_sum)
    return Pipe_size
# Launderer Design
Launder(Q_plant, PipeSpecification) :=
    Q_tank ← Q_plant/n_sedtanks
    Lamella_spacing ← b_plate/cos(α)
    n_orifices ← L_sedtank/(2*Lamella_spacing)
    ZW_sed ← 2 m
    ZW_platetops ← 1.8 m
    manifold_depth ← ZW_sed - ZW_platetops - (ZW_sed - ZW_platetops)/2
    D_avail ← AvailPipeSizes1(PipeSpecification)
    D_launder ← D_manifold(Q_tank, h_launder, 2*L_sedtank, Q_ratio, D_available, ν, ε, 0, n_orifices)
    h_losslaunder ← h_lmanifold(Q_tank, D_launder, 2*L_sedtank, 0, ν, ε, n_orifices)
    D_orifice ← D_orifices(D_circle, A_orfice, h_sedtank, h_losslaunder, Q_plant, A_circle, D_launder, K_orifice, Q_max)
    SedPipe_length ← 2
    orifice_dist ← .23
    return [SedPipe_length, D_orifice, orifice_dist, manifold_depth]  # error: This function requires at least 3 arguments but is applied to 1.
# Sludge Pipe Design
Sludge(Q_plant, PipeSpecification) :=
    D_orifice ← 2
    orifice_dist ← 23
    waste_inr ← .05
    return [waste_inr, D_orifice, orifice_dist]
# Channel Design
# The average velocity gradient in the cell where the energy
# dissipation is assumed to be occuring. This is the desired
# velocity gradient for the end of the flocculation tank.
Channel(Q_plant, SedTank_width, tank_thick) :=
    G_cell ← 15/s
    K_cell ← 3
    Π_cell ← 2
    w_channel ← 30 cm
    b ← (1/G_cell)^(1/2)*(Q_plant/w_channel)^(3/4)*(K_cell/(2*ν*Π_cell))^(1/4)
    A_opening ← b*w_channel*1.5
    height_opening ← A_opening/w_channel
    width_opening ← w_channel
    length_channel ← 3*SedTank_width + 2*tank_thick
    channel_dim ← [length_channel; width_opening; height_opening]
    return channel_dim
# The loss coefficient for the channel transition.
# The length of the zone where the energy is dissipated. Assume
# that energy is dissipated in a zone is twice as long as the
# smallest dimension flow.
# Width of channel, based on construction constraints?
# Opening of channel height determines the height
# for theentire channel
# Grit Chamber Design
# Maximum water surface elevation in the entrance tank measured from the center of the orifices at the design plant flow rate is Δh_orifice := 20 cm
# Gives an array of the vertical location of each set of holes given hole spacing and the maximum head:
# The pipe sections leading to the flocculator from the vertical pipes with the orifices will have n_elbows := 4 (a few of the elbows may actually be Tees) and each of these 90 degree bends will have a minor loss coefficient of approximately K_elbow := 1 The total pipe length between the orifices and the flocculator (rapid mix pipe) will be approximately L_rmpipe := 2 m.
heads(Spacing, Change) :=
    for i ∈ 0 .. Change/Spacing
        h_grit[i] ← i*Spacing
    return h_grit
# Assume D.orifice = 1.5 in, Korifice=0.63
# This function provides the flow rate for a given head.  Requires an array with hole numbers at each level up to the current head level.
Q(h, n, Orifice_spacing, A_drillbit, K_orifice) :=
    Q ← 0
    return Q if h == 0
    otherwise
        levels ← floor(h/Orifice_spacing)
        Q ← Q + K_orifice*A_drillbit*n[0]*sqrt(2*g*h) if levels == 0
        otherwise
            for i ∈ 0 .. levels - 1
                Q ← Q + K_orifice*A_drillbit*n[i]*sqrt(2*g*(h - Orifice_spacing*i))
        return Q
# This returns an array with the number of holes required to create a linear relationship between flow and depth at each vertical orifice spacing:
N_holes(h_grit, Base, MaxHeadChange, Orifice_spacing, FirstFlow, A_drillbit, K_orifice) :=
    n_holes[0] ← Base
    for p ∈ 1 .. MaxHeadChange/Orifice_spacing - 1
        n_holes[p] ← 0
        while Q(h_grit[p + 1], n_holes, Orifice_spacing, A_drillbit, K_orifice) ≤ FirstFlow*(p + 1)
            n_holes[p] ← n_holes[p] + .1
        n_holes[p] ← round(n_holes[p])
    return n_holes
gritchamber(Q_plant, DrillSize, r_drum, PipeSpecification) :=
    D_avail ← AvailPipeSizes1(PipeSpecification)
    h_lmax ← 20 cm
    h_lorificemax ← 20 cm
    K_sum ← K_sum(0, K_el45, 4, K_el90, K_Tflowrun, 0, K_Tflowbr, 0, K_gatevalve, 0, K_anglevalve, K_chkvalveconv, K_chkvalveball, 0, 0, 0, 0, 0, diamratio_exp0.75, K_exp0.75, diamratio_exp0.5, K_exp0.5, diamratio_exp0.25, K_exp0.25, diamratio_cont0.75, K_cont0.75, diamratio_cont0.5, K_cont0.5, diamratio_cont0.25, K_cont0.25)
    D_riser ← D_pipe(Q_plant, D_avail, h_lmax, L_rmpipe, ν, ε_pvc, K_sum)
    K_orifice ← 0.63
    A_orif ← A_orifice(h_lorificemax, K_orifice, Q_plant)
    n_risers ← ceil(4*A_orif/(π*D_riser^2*A_ratio))
    Orifice_spacing ← 2 cm
    A_drillbit ← π*DrillSize^2/4
    h_grit ← heads(Orifice_spacing, h_lmax)
    FirstFlow ← Q_plant/(h_lmax/Orifice_spacing)
    BaseHoles ← round(FirstFlow/Q_orifice(DrillSize, h_lmax, K_orifice))
    Q ← Q(h_lmax, n_orifices)
    n_orifices ← N_holes(h_grit, BaseHoles, h_lmax, Orifice_spacing, FirstFlow, A_drillbit, K_orifice)
    riser_area ← D_riser^2/4*π
    riser_areaTotal ← riser_area*n_risers
    drum_circumference ← r_drum^2*π
    riser_areaTotal ← drum_circumference if drum_circumference > riser_areaTotal
    grit_length ← sqrt(riser_areaTotal)
    grit_width ← r_drum*2 + sqrt(riser_areaTotal)
    grit_depth ← 2 m
    grit_dim ← [grit_length; grit_width; grit_depth]
    return [L_rmpipe/m, grit_dim/m, n_risers, n_orifice, D_riser/m, D_orifice/m]  # error: This variable is undefined.
gritchamber(720*L/min, .8 m, 10) =  # error: This variable is undefined.
# Plant Leveling Tank
PlantLevelingTank(Q_plant, PipeSpecification) :=
    D_avail ← AvailPipeSizes(PipeSpecification)
    lvltank_waterlvl ← 3
    wall_disp ← 3
    depth ← 2
    width ← 2
    length ← 2
    effluent_inr ← 5
    lvltank_dim ← [length; width; depth]
    return [lvltank_waterlvl, wall_disp, lvltank_dim, effluent_inr]
# Plant Elevation Design
PlantElevationDesign(Q_plant, n_sedtanks, sedtank_dim, FlocTank_dim) := 3
HydraulicDesign(Q_plant, FlocTank_dim, PipeSpecification, n_sedtanks, sedtank_dim, tank_thick, channel_thick, r_drum) :=
    Launder(Q_plant, PipeSpecification)[0]
    Launder(Q_plant, PipeSpecification)[1]
    Launder(Q_plant, PipeSpecification)[2]
    Launder(Q_plant, PipeSpecification)[3]
    Sludge(Q_plant, PipeSpecification)[0]
    Sludge(Q_plant, PipeSpecification)[1]
    Sludge(Q_plant, PipeSpecification)[2]
    Channel(FlocTank_dim, tank_thick, channel_thick)
    gritchamber(Q_plant, r_drum, PipeSpecification)[0]
    gritchamber(Q_plant, r_drum, PipeSpecification)[1]
    gritchamber(Q_plant, r_drum, PipeSpecification)[2]
    gritchamber(Q_plant, r_drum, PipeSpecification)[3]
    gritchamber(Q_plant, r_drum, PipeSpecification)[4]
    gritchamber(Q_plant, r_drum, PipeSpecification)[5]
    PlantLevelingTank(Q_plant, PipeSpecification)[0]
    PlantLevelingTank(Q_plant, PipeSpecification)[1]
    PlantLevelingTank(Q_plant, PipeSpecification)[2]
    PlantLevelingTank(Q_plant, PipeSpecification)[3]
    PlantElevationDesign(Q_plant, n_sedtanks, sedtank_dim, FlocTank_dim)  # disabled
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# Hydraulic Design Function
HydraulicDesign(Q_plant, FlocTank_dim, PipeSpecification, n_sedtanks, sedtank_dim, tank_thick, channel_thick, r_drum) := [
    Launder(Q_plant, PipeSpecification)[0];
    Launder(Q_plant, PipeSpecification)[1];
    Launder(Q_plant, PipeSpecification)[2];
    Launder(Q_plant, PipeSpecification)[3];
    Sludge(Q_plant, PipeSpecification)[0, 0];
    Sludge(Q_plant, PipeSpecification)[0, 1];
    Sludge(Q_plant, PipeSpecification)[0, 1];
    Channel(FlocTank_dim, tank_thick);
    1;
    1;
    1;
    1;
    1;
    1;
    PlantLevelingTank(Q_plant, PipeSpecification)[0];
    PlantLevelingTank(Q_plant, PipeSpecification)[1];
    PlantLevelingTank(Q_plant, PipeSpecification)[2];
    PlantLevelingTank(Q_plant, PipeSpecification)[3];
    PlantElevationDesign(Q_plant, n_sedtanks, sedtank_dim, FlocTank_dim)
]  # disabled
