# [reference: MasterProgram.xmcd]
L_Sed = 9.52822 m
# Dimensions
slope_dim := [W_SedSlopePlate; L_SedSlopeManifold; T_SedInletSlope]
sedport_dim := [W_SedSlopePlate - W_SedPort; L_SedPort; T_SedInletSlope]
# Origins
slope_origin := [0; 0; 0]
sedport_origin := [W_SedSlopePlate; 0; 0]
block2 := block("SedSlopesTot", slope_origin, slope_origin) = ["-block SedSlopesTot"; "0,0,0 all "; "-insert SedSlopesTot"; "0,0,0 "; " "]
sedslopeplate :=
    viewtop1 ← viewtop1
    layernew1 ← layer_new("slopes", ltpurple)
    layerset1 ← layer_set("slopes")
    box1 ← box(origin, slope_dim)
    box2 ← box(sedport_origin, sedport_dim)
    subtract1 ← subtractD(origin, sedport_origin)
    viewfront ← viewfront1
    array ← arrayB(origin, 1, N_SedPorts, W_SedSlopePlate)
    block ← block("SedSloeps", slope_origin, slope_origin)
    viewside ← viewrightside1
    rotate ← rotate_3d(origin, origin, "z", 60)
    mirror1 ← mirror3dyz(slope_origin, slope_origin - (W_SedSludgeFlat/2 + T_SedSlopePlate*sin(60 deg)))
    viewtop2 ← viewtop1
    move1 ← move(slope_origin, slope_origin, [W_SedSlopePlate/2; slope_origin[1]; slope_origin[2]])
    viewleftside1 ← viewleftside
    rectangle1 ← rectangle([slope_origin[0], slope_origin[0] + W_Sed; slope_origin[1], slope_origin[1] + H_Sed])
    viewtop2 ← viewtop
    move2 ← move(slope_origin, slope_origin, [W_SedSlopePlate/2; slope_origin[1]; slope_origin[2]])
    explode1 ← explode([slope_origin[0]; -W_SedSlopePlate/2; slope_origin[2]])
    slice1 ← slice_both([slope_origin[0]; -W_SedSlopePlate/2; slope_origin[2]], [W_SedSlopePlate/2; slope_origin[1]; slope_origin[2]], [W_Sed; slope_origin[1]; slope_origin[2]])
    erase1 ← erase([W_SedSlopePlate/2; -W_Sed/2; slope_origin[2]])
    move3 ← move([slope_origin[0]; -W_SedSlopePlate/2; slope_origin[2]], slope_origin, [W_SedSlopePlate*N_SedPorts; slope_origin[1]; slope_origin[2]])
    layerset2 ← layer_set("0")
    layerfreeze1 ← layer_freeze("slopes")
    one ← stack(viewtop, layernew1, layerset1, box1, box2, subtract1, viewfront, array, block, viewside, rotate, mirror1, viewtop2, move1, viewleftside1, rectangle1, viewtop2, move2, explode1, slice1, erase1, move3, block2, layerset2, layerfreeze1)
    return one
SedSlope := sedslopeplate
# [component: inputs SedSlope]
