# Engineer Entered Values:
Q_Plant := 110*L/min
# sed tank parameters
W_Sed := 42 in  # width of lamella = width of sed tank
L_SedPlateEstimated := 40 cm  # length of the lamella
B_SedPlate := 2.5 cm  # lamella spacing
EN_PipeSpec := 4
EN_DrillSeries := 0
# floc parameteres
T_FlocBaffle := 0.2 cm
# Values used to Draw Plant:
T_PlantWall := 15 cm
T_PltWall := 15 cm
T_Ap := T_PltWall
T_Cp := T_Ap
T_EtWall := T_PltWall
T_Mp := 30 cm
T_ChannelWall := 15 cm
W_MpWalkway := 1 m
C_FcmDoseMax := 90*mg/L
C_FcmAlum := 120*gm/L
EN_FcmTube := 0
Ti_StockMin := 30 hr
