# Minor Loss Coefficients
# Individual K Values | Expansions | Contractions
K_el90 := 0.9
diamratio_exp0.75 := 0
diamratio_cont0.75 := 0
K_el45 := 0.45
diamratio_cont0.25 := 0
diamratio_exp0.25 := 0
K_gatevalve := 0.39
diamratio_cont0.5 := 0
diamratio_exp0.5 := 0
K_chkvalveconv := 4
K_chkvalveball := 4.5
K_exp0.75 := 0.18
K_exp0.25 := 0.25
K_cont0.5 := 0.33
K_globevalve := 10
K_anglevalve := 4.3
K_exp0.5 := 0.55
K_cont0.75 := 0.18
K_cont0.25 := 0.43
K_1 := 0
K_returnbend := 1.5
K_Tflowrun := 0.6
K_Tflowbr := 1.8
K_orifice := 0.63
K_lturn := 0.45  # K.lturn is the K value for a long radius ninety degree turn
K_ent := 0.5  # K.ent is the K value for a pipe entrance
K_exit := 1
K_sum(N_elbow45, N_elbow90, N_teerun, N_teebr, GateValve, GlobeValve, AngleValve, CheckValveConv, CheckValveBall) :=
    K_2 ← N_elbow45*K_el45 + N_elbow90*K_el90
    K_3 ← K_Tflowrun*N_teerun + K_Tflowbr*N_teebr
    K_4 ← GateValve*K_gatevalve + GlobeValve*K_globevalve + AngleValve*K_anglevalve + CheckValveConv*K_chkvalveconv + CheckValveBall*K_chkvalveball
    K_5 ← diamratio_exp0.75*K_exp0.75 + diamratio_exp0.5*K_exp0.5 + diamratio_exp0.25*K_exp0.25 + diamratio_cont0.75*K_cont0.75 + diamratio_cont0.5*K_cont0.5 + diamratio_cont0.25*K_cont0.25
    K_sum ← K_2 + K_3 + K_4 + K_5
    return K_sum
PipeSize(Q_plant, PipeSpecification, L_pipe) :=
    K_sum ← K_sum(N_elbow45, N_elbow90, N_teerun, N_teebr, GateValve, GlobeValve, AngleValve, CheckValveConv, CheckValveBall)
    Pipe_size ← D_pipe(Q_plant, AvailPipeSizes1(PipeSpecification), h_lmax, L_pipe, ν, ε_pvc, K_sum)
    return Pipe_size  # error: This variable is undefined.
