# [reference: DesignAssumptions.xmcd]
SedTankDesign(Q_plant, SedTank_width, lamella_spacing, L_lamella, β, ChannelDim) :=
    Q_tank ← Q_plant/n_sedtanks
    spacebelow_slanted ← (SedTank_width/2)*tan(β)
    spacebelow_straight ← spacebelow_total - spacebelow_slanted
    angle_toosteep ← "Failure: Slope of walls too steep (should be less than 60 deg)."
    return angle_toosteep if spacebelow_slanted > 1 m
    spaceabove ← ratio_waterdepthtolaunderspacing*SedTank_width
    H_lamella ← L_lamella*sin(α)
    H_tank ← H_lamella + spaceabove + spacebelow_total + freeboard_sed
    v_c ← v_up/(1 + L_lamella/lamella_spacing*cos(α)*sin(α))
    vc_toobig ← "Failure: Critical velocity is greater than the suggested value"
    return vc_toobig if v_c > criticalvelocity_toobig
    A_active ← Q_tank/v_up
    L_active ← A_active/SedTank_width
    L_tank ← (L_lamella*cos(α) + L_active)
    N_lamella ← floor((L_active - ChannelDim[1])/(lamella_spacing/sin(α)))
    sedtank_vol ← 3*((SedTank_width*(H_tank - spacebelow_total)*L_tank) + .5*(SedTank_width*spacebelow_total*L_tank))
    sedtank_dim ← [L_tank; SedTank_width; H_tank]
    water_depth ← H_tank - freeboard_sed
    z_plat ← water_depth - HW_channel
    return [sedtank_dim/m, N_lamella, water_depth/m, z_plat/m, v_c*day/m]
SedTankDesign(Q_plant, SedTank_width, lamella_spacing, L_lamella, β, ChannelDim)
SedTankDesign(500*gpm, 42 in, 5 cm, .8 m, 45 deg, [3.6; 0.898; 0.7]*m) = [[8.91611; 1.0668; 2.05952], 131, 1.95952, 1.35952, 12.6132]
