# Test Space
# References
# Hydraulic Design
# [reference: HydraulicDesign.xmcd]
# Unit Processes
# [reference: UnitProcesses.xmcd]
# User Inputs
# [reference: UserInputs.xmcd]
# Pipes and Orifices
L_pipe = 7.116 m
PipeSize(Q_plant, PipeSpecification, h_lmax, K_sum, L_pipe) =  # error: This function accepts at most 3 arguments but is applied to 5.
# Launderer Design
b_plate := 1 m
Launder(Q_plant, PipeSpecification, b_plate, L_sedtank) =  # error: This variable is undefined.
# Sludge Pipe Design
Sludge(Q_plant, PipeSpecification) = [[0.029845; 0.0384048; 0.0440436; 0.0551942; 0.066929; 0.081534; 0.0932688; 0.105004; 0.129743; 0.154534; 0.201193; 0.2508; 0.297459; 0.32827; 0.375158; 0.422046; 0.468935; 0.562712], 0.00248315, 0.05]
# Channel Design
SedTank_width := 1 m
tank_thick := .5 m
Channel(Q_plant, SedTank_width, tank_thick) = [4; 0.3; 0.23193] m
# Grit Chamber Design
DrillSize := 1/4*in
r_drum := 12 in
gritchamber(Q_plant, DrillSize, r_drum, PipeSpecification) = [2, [0.540244; 1.14984; 2], 2, [4; 21; 3; 5; 4; 3; 4; 3; 2; 4], 0.0551942, 0.00635]
# Plant Leveling Tank
PlantLevelingTank(Q_plant, PipeSpecification) = [3, 3, [2; 2; 2], 5]
# Plant Elevation Design
PlantElevationDesign(Q_plant, n_sedtanks, sedtank_dim, FlocTank_dim) =  # error
# Hydraulic Design Function
# Sedimentation Tank Design
# Flocculator Design
# Chemical Feed Design
