# User Inputs
Q_plant := 100*L/min  # plant flowrate
# Types of pipes to be used
PipeSpecification := 8
# chem stock tank sizes
h_drum := 1 m  # height of chemical stock tank
# grit chamber parameters
D_drill := 1/4*in  # Diameter of drill used for orifices in grit chamber riser pipe
# floc tank parameters
n_channels := 3  # Number of channels in the flocculator
# sed tank parameters
SedTank_width := 100 cm  # Width of the lamella
L_lamella := 80 cm  # length of the lamella
lamella_spacing := 5 cm  # lamella spacing
# Angle of the bottom of the sed tank
# Depth between the bottom of the lamella and the bottom of the sedimentation tank
