# [reference: basics - Copy.xmcd]
# [reference: pipe - Copy.xmcd]
Sludgescript(p1, p2, p3, p4, p5, p6, p7, ND, R1, R2, R3, L, n1, n2, d1, win1, win2, EN) :=
    viewtop ← viewtop
    pipe1 ← Pipe(p1, ND, L, EN)
    zoom_win ← zoom_win(win1, win2)
    cylinder3 ← cylinderD(p2, R3, p3)
    viewrightside ← viewrightside
    array1 ← array(p4, n1, n2, -d1)
    subtract2 ← subtractH(p5, p6, p7)
    one ← concat(viewtop, zoom_win)
    two ← pipe1
    three ← cylinder3
    four ← viewrightside1
    five ← concat(array1, viewtop, subtract2)
    return stack(one, two, three, four, five)
Sludgepipe1(sludgepipe_origin, ND, sludgepipe_outr, sludgepipe_inr, orifice_rad, tank_length, orifice_dist, EN) := Sludgescript([sludgepipe_origin[0]; sludgepipe_origin[1]; sludgepipe_origin[2]], [sludgepipe_origin[0]; sludgepipe_origin[1]; sludgepipe_origin[2] + tank_length - orifice_dist], [
    sludgepipe_origin[0];
    sludgepipe_origin[1] + sludgepipe_outr + zc;
    sludgepipe_origin[2] + tank_length - orifice_dist
], [
    sludgepipe_origin[1] + sludgepipe_outr + zc;
    sludgepipe_origin[2] + tank_length - orifice_dist;
    sludgepipe_origin[0]
], [sludgepipe_origin[0]; sludgepipe_origin[1] - sludgepipe_outr], [sludgepipe_origin[0] + orifice_rad + zc; sludgepipe_origin[1] + sludgepipe_outr + 2*zc], [sludgepipe_origin[0] - orifice_rad - zc; sludgepipe_origin[1] - zc], ND, sludgepipe_outr, sludgepipe_inr, orifice_rad, tank_length, floor(tank_length/orifice_dist), 1, orifice_dist, [
    sludgepipe_origin[0] - sludgepipe_outr;
    sludgepipe_origin[1] - sludgepipe_outr;
    sludgepipe_origin[2]
], [
    sludgepipe_origin[0] + sludgepipe_outr;
    sludgepipe_origin[1] + sludgepipe_outr + zc;
    sludgepipe_origin[2]
], EN)
# p1 | p2 | p3 | p5 | p6 | p7
p4
Sludgepipe(sludgepipe_origin, ND_sludge, tank_length, orifice_rad, orifice_dist, EN_PipeSpec) := Sludgepipe1(sludgepipe_origin, ND_sludge, outerradius(ND_sludge), innerD(ND_sludge, EN_PipeSpec)/2, orifice_rad, tank_length, orifice_dist, EN_PipeSpec)
# [component: inputs Sludgepipe([0; 0; 0]*m, 4 in, 1 m, .25 in, 6 in, 4)]
