# [reference: basics - Copy.xmcd]
# platform origin=bottom nw corner
StockPlatform1_script(plat_origin, plat_point, col1_origin, col1_point, col2_origin, col2_point, col3_origin, col3_point, col4_origin, col4_point) :=
    box1 ← box(plat_origin, plat_point)
    box2 ← box(col1_origin, col1_point)
    box3 ← box(col2_origin, col2_point)
    box4 ← box(col3_origin, col3_point)
    box5 ← box(col4_origin, col4_point)
    union1 ← union_allA
    one ← stack(box1, box2, box3, box4, box5, zoomA, union1)
    return ← one
StockPlatform1_scripta(platform_origin, column1_origin, column2_origin, column3_origin, column4_origin, platform_dim, column_dim) := StockPlatform1_script(platform_origin, [
    platform_origin[0] - platform_dim[0];
    platform_origin[1] - platform_dim[1];
    platform_origin[2] + platform_dim[2]
], column1_origin, [
    column1_origin[0] + column_dim[0];
    column1_origin[1] - column_dim[1];
    column1_origin[2] - column_dim[2]
], column2_origin, [
    column2_origin[0] - column_dim[0];
    column2_origin[1] - column_dim[1];
    column2_origin[2] - column_dim[2]
], column3_origin, [
    column3_origin[0] + column_dim[0];
    column3_origin[1] + column_dim[1];
    column3_origin[2] - column_dim[2]
], column4_origin, [
    column4_origin[0] - column_dim[0];
    column4_origin[1] + column_dim[1];
    column4_origin[2] - column_dim[2]
])
StockPlatform1(platform_origin, platform_dim, column_dim) := StockPlatform1_scripta(platform_origin, [platform_origin[0] - platform_dim[0]; platform_origin[1]; platform_origin[2]], platform_origin, [platform_origin[0] - platform_dim[0]; platform_origin[1] - platform_dim[1]; platform_origin[2]], [platform_origin[0]; platform_origin[1] - platform_dim[1]; platform_origin[2]], platform_dim, column_dim)
StockPlatform(origin, disp, thick, walkway, column_dim, R) := StockPlatform1(origin, [(2*(2*R)) + (3*disp); (2*R) + walkway + disp; thick], column_dim)
DrawingStockPlatform := StockPlatform([0; 0; 0]*m, .1 m, .1 m, 1 ft, [.1; .1; 1]*m, 1.5 ft)
# [component: inputs DrawingStockPlatform]
StockBarrels1_script(barrel1_origin, barrel2_origin, R, H_barrel) :=
    cylinder1 ← cylinderC(barrel1_origin, R, H_barrel)
    cylinder2 ← cylinderC(barrel2_origin, R, H_barrel)
    one ← stack(cylinder1, cylinder2)
    return ← one
StockBarrels1(platform_origin, platform_dim, disp, R, H_barrel) := StockBarrels1_script([
    platform_origin[0] - ((3*R) + (2*disp));
    platform_origin[1] - (R + disp);
    platform_origin[2] + platform_dim[2]
], [
    platform_origin[0] - (R + disp);
    platform_origin[1] - (R + disp);
    platform_origin[2] + platform_dim[2]
], R, H_barrel)
StockBarrels(origin, disp, thick, walkway, R, H) := StockBarrels1(origin, [(2*(2*R)) + (3*disp); (2*R) + walkway + disp; thick], disp, R, H)
DrawingStockBarrels := StockBarrels([0; 0; 0]*m, .1 m, .1 m, 1 ft, 1.5 ft, 1 m)
# [component: inputs DrawingStockBarrels]
