# [reference: basics - Copy.xmcd]
# [reference: chemicalstock - Copy.xmcd]
# [reference: PipeDatabase.xmcd]
walk_space := 2 ft
D_Drum := .75 m
L_Plt := 1 m
L_Et := .75 m
S_Drum := 10 cm
W_Plt := 1 m
W_Et := .75 m
H_Drum := 1 m
T_PltWall := 1 ft
T_EtWall := 1 ft
ND_Lfom := 4 in
W_MpColumn := 30 cm
W_ApColumn := 20 cm
W_CpColumn := 20 cm
L_MpColumn := W_MpColumn
L_ApColumn := 20 cm
L_CpColumn := 20 cm
H_ApColumn := 120 cm
H_CpColumn := 120 cm
W_MpWalkway := 3 ft
W_ApWalkway := 1.5 ft
W_CpWalkway := 1.5 ft
T_Mp := 1.5 ft
T_Ap := 1 ft
T_Cp := 1 ft
H_Sed := 2.12 m
W_FlocChannel := .5 m
H_Channel := 2 ft
W_Sed := 1 m
N_FlocChannels := 2
L_Sed := 2.5 m
N_SedTanks := 3
T_PlantWall := 1 ft
T_ChannelWall := .5 ft
# Automated Design: AutoCAD: Platform
# Platform Inputs
tank_origin := [0; 0; 0]*m
platformlayout :=
    layout ← 1
    layout ← 2 if |L_Et + walk_space| < |L_Plt|
    return layout
column_dim := [W_MpColumn; L_MpColumn; H_Sed + T_PlantWall - H_Channel - T_ChannelWall]
platform1_dim := [-(L_Sed + 2*T_PlantWall); W_MpWalkway; T_Mp]
platform2_dim :=
    if platformlayout == 1
        origin ← [
            -(W_MpWalkway + L_Et + 2*T_EtWall + 2*D_Drum + 3*S_Drum + ShortTeeLength(ND_Lfom) + walk_space);
            (N_SedTanks*W_Sed) + ((N_SedTanks + 2)*T_PlantWall) + 2*W_FlocChannel + W_MpWalkway + T_PlantWall;
            T_Mp
        ]
    if platformlayout == 2
        origin ← [
            -(W_MpWalkway + L_Plt + 2*T_PltWall + 2.*D_Drum + 3*S_Drum);
            (N_SedTanks*W_Sed) + ((N_SedTanks + 2)*T_PlantWall) + 2*W_FlocChannel + W_MpWalkway + T_PlantWall;
            T_Mp
        ]
    return origin
alumplatcol_dim := [L_ApColumn; W_ApColumn; H_ApColumn]
chlorineplatcol_dim := [L_CpColumn; W_CpColumn; H_CpColumn]
# Origins Points
platform1_origin := [
    tank_origin[0] + T_PlantWall;
    tank_origin[1] + (N_SedTanks*W_Sed) + ((N_SedTanks + 2)*T_PlantWall) + 2*W_FlocChannel;
    tank_origin[2] + H_Sed - H_Channel - T_Mp
]
platform2_origin := [
    tank_origin[0] - L_Sed - T_PlantWall;
    tank_origin[1] - T_PlantWall;
    tank_origin[2] + H_Sed - H_Channel - T_Mp
]
column1_origin := [
    tank_origin[0] + T_PlantWall;
    tank_origin[1] + (N_SedTanks*W_Sed) + ((N_SedTanks + 2)*T_PlantWall) + 2*W_FlocChannel + W_MpWalkway;
    tank_origin[2] + H_Sed - H_Channel - T_ChannelWall
]
column2_origin :=
    if platformlayout == 1
        origin ← [
            tank_origin[0] - L_Sed - T_PlantWall - W_MpWalkway - L_Et - 2*T_EtWall - ShortTeeLength(ND_Lfom) - walk_space - 2*D_Drum - 3*S_Drum + column_dim[0];
            tank_origin[1] + (N_SedTanks*W_Sed) + ((N_SedTanks + 2)*T_PlantWall) + 2*W_FlocChannel + W_MpWalkway;
            tank_origin[2] + H_Sed - H_Channel - T_ChannelWall
        ]
    if platformlayout == 2
        origin ← [
            tank_origin[0] - L_Sed - T_PlantWall - W_MpWalkway - L_Plt - 2*T_PltWall - 2*D_Drum - 3*S_Drum + column_dim[0];
            tank_origin[1] + (N_SedTanks*W_Sed) + ((N_SedTanks + 2)*T_PlantWall) + 2*W_FlocChannel + W_MpWalkway;
            tank_origin[2] + H_Sed - H_Channel - T_ChannelWall
        ]
    return origin
column3_origin :=
    if platformlayout == 1
        origin ← [
            tank_origin[0] - L_Sed - T_PlantWall - W_MpWalkway - L_Et - 2*T_EtWall - ShortTeeLength(ND_Lfom) - walk_space - 2*D_Drum - 3*S_Drum + column_dim[0];
            tank_origin[1] - T_PlantWall + column_dim[1];
            tank_origin[2] + H_Sed - H_Channel - T_ChannelWall
        ]
    if platformlayout == 2
        origin ← [
            tank_origin[0] - L_Sed - T_PlantWall - W_MpWalkway - L_Plt - 2*T_PltWall - 2*D_Drum - 3*S_Drum + column_dim[0];
            tank_origin[1] - T_PlantWall + column_dim[1];
            tank_origin[2] + H_Sed - H_Channel - T_ChannelWall
        ]
    return origin
alumplat_origin := [
    tank_origin[0] - L_Sed - T_PlantWall - W_MpWalkway - L_Et - 2*T_EtWall - walk_space;
    tank_origin[1] + (N_SedTanks*(W_Sed + T_PlantWall)) + (N_FlocChannels*(W_FlocChannel + T_PlantWall)) + W_MpWalkway;
    tank_origin[2] + H_Sed - H_Channel + H_ApColumn
]
chlorineplat_origin := [
    tank_origin[0] - L_Sed - T_PlantWall - W_MpWalkway - L_Plt - (2*T_PltWall);
    tank_origin[1] + (N_SedTanks*(W_Sed + T_PlantWall)) + (N_FlocChannels*(W_FlocChannel + T_PlantWall)) - W_Plt - (2*T_PltWall);
    tank_origin[2] + H_Sed - H_Channel + H_CpColumn
]
# Platform Scripts
MainPlatformscript :=
    layer1 ← layer_new("platform", grey)
    box1 ← box(platform1_origin, platform1_origin + platform1_dim)
    box2 ← box(platform2_origin, platform2_origin + platform2_dim)
    box3 ← box(column1_origin, column1_origin - column_dim)
    box4 ← box(column2_origin, column2_origin - column_dim)
    box5 ← box(column3_origin, column3_origin - column_dim)
    union1 ← union_allA
    layerset ← layer_set("0")
    layerfreeze1 ← layer_freeze("platform")
    one ← stack(layer1, box1, box2, box3, box4, box5, union1, layerset, layerfreeze1)
    return ← one
AlumStock :=
    layernewap ← layer_new("alumplatform", ltgrey)
    alumplatform ← StockPlatform(alumplat_origin, S_Drum, T_Ap, W_ApWalkway, alumplatcol_dim, D_Drum/2)
    layerseta ← layer_set("0")
    layerfreezeap ← layer_freeze("alumplatform")
    layernewab ← layer_new("alumbarrels", blue)
    alumbarrels ← StockBarrels(alumplat_origin, S_Drum, T_Ap, W_ApWalkway, D_Drum/2, H_Drum)
    layerfreezeab ← layer_freeze("alumbarrels")
    one ← stack(layernewap, alumplatform, layerseta, layerfreezeap, layernewab, alumbarrels, layerseta, layerfreezeab)
    return one
ChlorineStock :=
    layernewcp ← layer_new("chlorineplatform", ltgrey)
    chlorineplatform ← StockPlatform(chlorineplat_origin, S_Drum, T_Cp, W_CpWalkway, chlorineplatcol_dim, D_Drum/2)
    layersetc ← layer_set("0")
    layerfreezecp ← layer_freeze("chlorineplatform")
    layernewcb ← layer_new("chlorinebarrels", blue)
    chlorinebarrels ← StockBarrels(chlorineplat_origin, S_Drum, T_Cp, W_CpWalkway, D_Drum/2, H_Drum)
    layerfreezecb ← layer_freeze("chlorinebarrels")
    one ← stack(layernewcp, chlorineplatform, layersetc, layerfreezecp, layernewcb, chlorinebarrels, layersetc, layerfreezecb)
    return one
Platform := stack(MainPlatformscript, AlumStock, ChlorineStock)
# [component: inputs Platform]
