# [reference: MinorLossCoefficients.xmcd]
# [reference: FluidsFunctions.xmcd]
# [reference: DesignAssumptions.xmcd]
# [reference: userinputs.xmcd]
Q_Plant := 2000*L/min
## BOD
D_FcmValveOrifice := 0.093 in
HL_FcmTube := 20 cm
ID_FcmTubeEnglish := [0.0625; 0.125; 0.17; 0.25; 0.3125; 0.375]*in
ID_FcmTubeMetric := [2; 3; 4; 5; 6; 7]*mm
L_FcmTubeMax := 2 m  # The maximum length of tubing that we are willing to use.
## User
C_FcmDoseMax := 90*mg/L
C_FcmAlum := 400*gm/L
EN_FcmTube := 1
Ti_StockMin := 30 hr
Q_FcmMax := Q_Plant*C_FcmDoseMax/C_FcmAlum = 450 mL/min
Q_FcmMax := 275*mL/min
Vol_Stock := Q_FcmMax*Ti_StockMin = 495 L
HL_FcmValve := h_orifice(D_FcmValveOrifice, Pi_VenaContractaOrifice, Q_FcmMax) = 14.0503 cm
L_FcmTubeMin := HL_FcmTube
# The length of the tube has to be at least as great as the maximum head loss with some additional length to be able to reach the ports
D_available :=
    D ← ID_FcmTubeEnglish if EN_FcmTube == 0
    D ← ID_FcmTubeMetric otherwise
    return D
D_available = [2; 3; 4; 5; 6; 7] mm
Al := 27*gm/mol
S := 32.064*gm/mol
O := 16*gm/mol
H := 1.008*gm/mol
MW_Al2O3 := 2*Al + 3*O
MW_alum := 2*Al + 3*(S + 4*O) + 14.3*(2*H + O)
m_μ := slope([0; 323.433; 423.403; 546.895], [1*10^-3; 1.2*10^-3; 1.3*10^-3; 1.4*10^-3])*m^2/s = 7.25522e-7 m^2/s
b_μ := intercept([0; 323.433; 423.403; 546.895], [1*10^-3; 1.2*10^-3; 1.3*10^-3; 1.4*10^-3])*kg/(m*s) = 0.000990343 kg/(m*s)
μ_Alum(C_FcmAlum) := m_μ*C_FcmAlum + b_μ
ρ_Alum(C_FcmAlum) := 1*gm/cm^3/(-2.308*10^-3*L/gm*MW_Al2O3/MW_alum*C_FcmAlum + 1.012)
ν_Alum(C_FcmAlum) := μ_Alum(C_FcmAlum)/ρ_Alum(C_FcmAlum)
NU_FcmAlum := ν_Alum(C_FcmAlum) = 1.09488e-6 m^2/s
NU_FcmAlum := 1*10^-6*m^2/s
Re_max := 2100
# This is the maximum flow that can be sent through the alum feeder without requiring extremely long tubes. It is based on eliminating diameter from the Hagen-Poiseuille equation by using the maximum Reynolds number constraint. For higher flows multiple parallel tubes could be used. However the maximum flow rate that can be handled by the float valve needs to be considered.
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Q_FcmMaxlaminar(L_FcmTubeMax, HL_FcmTube, NU_FcmAlum) := (L_FcmTubeMax*Re_max^4*π^3*NU_FcmAlum^5/(2*g*HL_FcmTube))^(1/3)
Q_FcmMaxlaminar(L_FcmTubeMax, HL_FcmTube, NU_FcmAlum) = 404.958 mL/min
# Minimum diameter required to get laminar flow at max flow based on Reynolds number for transition to turbulence
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D_minlaminar(Q_FcmMax, NU_FcmAlum) := 4*Q_FcmMax/(π*NU_FcmAlum*Re_max)
# Now we can calculate the diameter of tubing required to accomodate the largest flow that a flow control module can deliver withohut requiring an excessively long tube
D_minlaminar(Q_FcmMaxlaminar(L_FcmTubeMax, HL_FcmTube, NU_FcmAlum), NU_FcmAlum) = 4.09213 mm
# Length of tube required to get desired head loss at maximum flow based on the Hagen-Poiseuille equation.
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L_tube(Q_FcmMax, D, HL_FcmTube, NU_FcmAlum) := HL_FcmTube*g*π*D^4/(128*NU_FcmAlum*Q_FcmMax)
# Minimum diameter of tubing to produce the desired head loss at the maximum flow using the minimum feasible length of tubing. Based on the Hagen-Poiseuille equation.
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D_minheadloss(Q_FcmMax, L_FcmTubeMin, HL_FcmTube, NU_FcmAlum) := (128*NU_FcmAlum*Q_FcmMax*L_FcmTubeMin/(HL_FcmTube*g*π))^(1/4)
# The minimum diameter is the maximum of the diameter calculated by the previous two equations. A larger diameter could be used if a longer tube is used.
D_min(Q_FcmMax, L_target, HL_FcmTube, NU_FcmAlum) := max(D_minheadloss(Q_FcmMax, L_target, HL_FcmTube, NU_FcmAlum), D_minlaminar(Q_FcmMax, NU_FcmAlum))
# Define a range of flows that we will use to plot the results.
Q_range := 10*mL/min, 20*mL/min .. Q_FcmMaxlaminar(L_FcmTubeMax, HL_FcmTube, NU_FcmAlum)
## Tube diameter constraints
# Now let's add the constraint of given tube diameters. First we write a function that will round up  to the next available tube size.
forceround(x, xarray, direction) :=
    xarray ← sort(xarray)
    i ← 0
    while x > xarray[i]
        i ← i + 1
    return xarray[i - 1 + direction]  # direction is for rounding up (1) or rounding down (0).
# Now we use the forceround function to find the design tube diameter based on the minimum tube diameter and the available tube diameters.
D_design(Q_FcmMax, L_FcmTubeMax, HL_FcmTube, NU_FcmAlum) := forceround(D_min(Q_FcmMax, L_FcmTubeMax, HL_FcmTube, NU_FcmAlum), D_available, 1)
# At very low flows the design will fail given a finite set of tube diameters. Thus calculate the minimum design flow that can be produced based on the Hagen-Poiseuille equation.
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Q_min(L_FcmTubeMax, HL_FcmTube, D_min, ν) := HL_FcmTube*g*π*D_min^4/(128*ν*L_FcmTubeMax)
Q_min(L_FcmTubeMax, HL_FcmTube, D_available[0], NU_FcmAlum) = 23.1064 mL/min
# Redefine the flow rate to only include the feasible range given the constraints. Note that the minimum flow plotted is the minimum design flow. The design flow is the maximum flow for a flow control module.
Q_range := Q_min(L_FcmTubeMax, HL_FcmTube, D_available[0], NU_FcmAlum), Q_min(L_FcmTubeMax, HL_FcmTube, D_available[0], NU_FcmAlum) + 1*mL/min .. Q_FcmMaxlaminar(L_FcmTubeMax, HL_FcmTube, NU_FcmAlum)
# The maximum tube length constraint may be violated if there aren't enough available tubing diameters.
D_tube := D_design(Q_FcmMax, L_FcmTubeMin, HL_FcmTube, NU_FcmAlum) = 3 mm
L_design := L_tube(Q_FcmMax, D_tube, HL_FcmTube, NU_FcmAlum) = 0.850735 m  # designs for the particular flow rate
y := transpose([L_design, L_design, 0 m])
x := transpose([0, Q_FcmMax/(mL/min), Q_FcmMax/(mL/min)])
y_d := transpose([D_tube/mm, D_tube/mm, 0])
x_d := transpose([0, Q_FcmMax/(mL/min), Q_FcmMax/(mL/min)])
D_tube = 3 mm
D_tube = 0.11811 in
L_design = 85.0735 cm
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MinorLosses := h_e(400*mL/min, 4 mm, 1.5) = 2.15248 cm
