# AguaClara Water Treatment Plants
# Automated Design
# User Inputs:
HW_Sed := 2.2 m
# Design References
# [reference: UserInputs- Gracias 1W test.xmcd]
# [reference: DesignAssumptions- gracias 1W test.xmcd]
# [reference: MathFunctions.xmcd]
# [reference: PipeDatabase.xmcd]
# [reference: MinorLossCoefficients.xmcd]
# [reference: FluidsFunctions.xmcd]
# Inlet Channel:
N_SedInletPipes := 6
N_SedTanks := 8
# [reference: Inlet Channel-gracias 1W test.xmcd]
W_InletChannel = 0.733389 m
L_Channel = 9.836 m
ND_SedPipeEntrance = 4 in
N_SedInletPipes = 6
H_InletChannel = 1.1 m
Q_Plant = 800 gal/min
# Sedimentation Tanks:
# [reference: Sedimentation-gracias 1W test.xmcd]
N_SedTanks = 8
H_SedBelowSlope = 1.03005 m
H_SedBelowStraight = 0.0762 m
H_SedBetween = 0.0762 m
HW_Sed = 2.2 m
H_Sed = 2.3 m
H_SedBelow = 1.10625 m
V_check := Q_Plant*4/(N_SedInletPipes*N_SedTanks*π*ND_SedPipeEntrance^2) = 0.425518 ft/s
L_Sed = 7.21365 m
ND_SedPipeEntrance = 4 in
# Sedimentation Tank Sludge Drain:
# [reference: SludgeDrain.xmcd]
N_SedSludgeOrifices = 72
ND_SedSludge = 4 in
Q_SludgeDrainInitial = 1142.11 L/min
D_SedSludgeOrifice = 0.1875 in
# Sedimentation Tank Inlet Slopes:
# [reference: Sed. Inlet Slopes.xmcd]
B_SedInlet = 3.80249 cm
H_SedInlet = 4.96379 cm
AN_SedTopInlet = 60 deg
AN_SedBottom = 10 deg
L_SedTopInlet = 1.0795 m
A_SedInlet = 2266.15 cm^2
H_SedTopInlet = 93.4874 cm
H_SedInletSlopes = 1.03487 m
H_SedBottom = 0.0951725 m
# Sedimentation Tank Effluent Launder:
# [reference: Launder.xmcd]
N_SedLaunderOrifices = 110
Q_SedLaunderOrifices = 1.72064 L/min
# Exit Channel:
# [reference: Exit Channel.xmcd]
W_ExitChannel = 0.733389 m
ND_SedLaunder = 6 in
H_ExitChannel = 1.1 m
L_SedLaunder = 5.59687 m
L_ExitChannel = 9.836 m
D_SedLaunderOrifice = 0.3125 in
H_PltWeir = 0.865031 m
Z_SedLaunder = 2.07586 m
HW_ExitChannel = 0.96 m
# Lamella:
# [reference: Lamella.xmcd]
L_SedPlate = 1.10488 m
B_SedPlate = 5.10281 cm
S_SedPlate = 4.80281 cm
N_SedPlates = 85
AN_SedPlate = 60 deg
V_SedC = 10.0146 m/day
V_SedUp = 70 m/day
H_SedPlate = 0.956851 m
H_SedAbove = 0.208275 m
# Flow Controller:
# [reference: FCM.xmcd]
N_Fcm = 6
ID_FcmTube = 4.318 mm
ID_FcmTube = 0.17 in
L_FcmTube = 255.151 cm
Q_FcmTubeMax = 378.541 mL/min
HL_FcmValve = 26.6223 cm
# Flocculator:
# [reference: Flocculation.xmcd]
W_FlocChannel = 0.53975 m
S_FlocBaffle = [0.386239; 0.462041; 0.612545; 1.57366] m
B_FlocBaffle = [0.390239; 0.466041; 0.616545; 1.57766] m
N_FlocBafflesMin = 19
HL_Floc = 7.89618 cm
X_FlocBaffles = [
    0.68975, 5.62499, 1.58866;
    1.07999, 4.04734, 3.16631;
    1.47023, 2.46968, 4.74397;
    1.86047, 0, 6.32162;
    2.32651, 0, 0;
    2.79255, 0, 0;
    3.25859, 0, 0;
    3.87513, 0, 0;
    4.49168, 0, 0;
    5.10822, 0, 0
] m
HW_FlocStart = 2.27896 m
W_FlocPort = 1.57366 m
L_FlocBaffles = [
    1.81376, 1.58746, 0.626344;
    1.91376, 0.726344, 0.726344;
    1.81376, 0.626344, 0.626344;
    1.91376, 0, 0.726344;
    1.73796, 0, 0;
    1.83796, 0, 0;
    1.73796, 0, 0;
    1.68746, 0, 0;
    1.58746, 0, 0;
    1.68746, 0, 0
] m
H_FlocPort = 0.53975 m
N_FlocBaffles = 17
Z_FlocBaffles = [
    0, 0, 0;
    0.386239, 1.57366, 1.57366;
    0, 0, 0;
    0.386239, 0, 1.57366;
    0, 0, 0;
    0.462041, 0, 0;
    0, 0, 0;
    0.612545, 0, 0;
    0, 0, 0;
    0.612545, 0, 0
] m
Gt_FlocMinFlow = 6366.84
N_FlocChannels = 3
# Entrance Tank:
# [reference: EntranceTank.xmcd]
ND_Lfom = 20 in
HL_Rm = 0.890191 cm
N_Lfom = 1
D_LfomOrifices = 52.3875 mm
Q_LfomErrorMax = 0.74575 %
N_LfomOrifices = [5; 4; 3; 2; 2; 2; 1; 2; 1; 1]
L_Et = 0.53975 m
W_Et = 0.53975 m
HW_EtMin = 0.2 m
HW_EtMax = 0.4 m
H_Et = 0.5 m
ZW_Et = 2.52896 m
# Any additional needed elevations should be calculated in the files above.
# AutoCAD References
# [reference: basics.xmcd]
# [reference: pipe.xmcd]
# [reference: tank.xmcd]
# [reference: lamina.xmcd]
# [reference: cross.xmcd]
# [reference: Tee.xmcd]
# [reference: elbow.xmcd]
# [reference: Sludge.xmcd]
# [reference: Channel.xmcd]
# [reference: Manifold.xmcd]
# [reference: SedTankslopes.xmcd]
# [reference: Sed Tank Inlet Slope.xmcd]
# [reference: chemicalstock.xmcd]
# [reference: Sedimentation Tank.xmcd]
# [component: inputs SedTank]
# [reference: Flocculation Tank.xmcd]
# [component: inputs FlocTank]
# [reference: Entrance Tank.xmcd]
# [component: inputs EntranceTank]
