# Flocculation Function
# References:
# [reference: userinputs.xmcd]
# [reference: DesignAssumptions.xmcd]
# [reference: PipeDatabase.xmcd]
# [reference: Minor loss coefficients.xmcd]
# [reference: FluidsFunctions.xmcd]
# [reference: Channel.xmcd]
# [reference: Sedimentation.xmcd]
# This function calculates the size of the hole between the two channels in the flocculator. The function is called below by the flocculator function. (Note: this function will NOT work for any number of flocculator channels or baffle spacings)
uturnhole(S_FlocBaffle, W_FlocTank, L_FlocTank, N_FlocBaffle, S_FlocBaffleLast) :=
    uturnhole_area ← S_FlocBaffleLast*m*W_FlocTank
    W_FlocUturnHole ← S_FlocBaffle[1]*m - S_FlocPort if L_FlocTank/N_FlocTankChannels > S_FlocBaffle[0]*m*N_FlocBaffle[0]
    W_FlocUturnHole ← S_FlocBaffle[0]*m - S_FlocPort otherwise
    H_FlocUturnHole ← uturnhole_area/W_FlocUturnHole
    return [W_FlocUturnHole; H_FlocUturnHole]
# The area of the hole should be equal to the flow area (baffle spacing x tank width) of the last baffle. This guarantees that the shear through this hole is not going to break up flocs. It is assumed that the baffle spacing at the beginning of the second channel is either the first or second spacing size. The width of the u turn hole cannot be greater than this baffle spacing. There should be some space around the hole that is solid (ie the hole should not extend all the way from the end of the channel to the baffle). After finding the width of the hole, the height of it should be set to make the hole the desired area. This function returns the dimensions of the hole. (Note: We are putting the hole in the center of the wall, but how should the location be ouputted?)
uturnhole([0.274; 0.573; 0.81], 0.533*m, 17.832*m, [14; 4; 13], .81) = [0.558; 0.77371] m
# This function checks to see if shortcircuiting, (due to the large baffle spacing) will be a problem at the end of the tank. The function is called below by the flocculator function. (Note: this function will work for any number of flocculator channels and baffle spacings)
shortcircuit(S_FlocBaffle, H_FlocEnd, H_FlocTank) :=
    gap ← Pi_FlocBaffle*S_FlocBaffle*m
    L_FlocBaffleDown ← H_FlocEnd - gap
    L_FlocBaffleUp ← H_FlocTank - gap
    baffle_overlap ← H_FlocEnd - 2*gap
    Pi_FlocBaffle.new ← (H_FlocEnd - H_FlocOverlapMin)/(2*S_FlocBaffle*m)
    i ← 0
    while i < length(S_FlocBaffle)
        L_FlocBaffleUp[i] ← H_FlocTank - Pi_FlocBaffle.new[i]*S_FlocBaffle[i]*m if baffle_overlap[i] < H_FlocOverlapMin
        L_FlocBaffleDown[i] ← H_FlocEnd - Pi_FlocBaffle.new[i]*S_FlocBaffle[i]*m if baffle_overlap[i] < H_FlocOverlapMin
        i ← i + 1
    return [L_FlocBaffleDown, L_FlocBaffleUp]
# Upper baffles (ie baffles going down into the water) extend from the top of the tank down until they are 1.5*b from the bottom of the tank. Lower baffles (ie baffles going up into the water) extend from the bottom of the tank un until they 1.5*b from the water level at the end of the tank (ie headloss is not accounted for).
# Short circuiting will occur when the total space above or below adjacent baffles is approximately the same as the water depth of the flocculator. In other words, when 3b = h. If short circuitng has occured, it means adjacent baffles no longer overlap and the water can go straight through the center of the tank, rather than around the baffles.
# Typically, the space above or below a baffle (gap) is equal to Pi.FlocBaffle*bafflespacing. In this function, Pi.FlocBaffle is equal to 1.5. Therefore the length of the baffle is the water height minus gap (assuming no head loss). The overlap between adjacent baffles would then be determined by the water depth minus 3*baffle spacing). If this overlap is less than 2 cm (design assumption), a new gap ratio (less than 1.5) should be used. This ratio should be set to guarentee an overlap of 2 cm.  This function caclulates the new spacing ratio and then uses a loop to check for short circuiting at all baffle spacings. If necessary it changes the baffle length and returns a new vector of the lengths at each spacing.
shortcircuit([.1; .3; .75], 2.1*m, 2.5*m) = [[1.95; 1.65; 1.06], [2.35; 2.05; 1.46]] m
# This function creates a matrix for two channels (if needed) giving the x and y coordinates of each baffle. The function is called below by the flocculator function. (Note: this function will NOT work for any number of flocculator channels). This function is called when the length needed by the baffles is greater than a single channel length.
bafflepositions_2channels(L_FlocTank, H_FlocTank, N_FlocBaffles, L_FlocBaffleUp, L_FlocBaffleDown, S_FlocBaffle) :=
    n ← 0
    k ← 0
    h ← 1
    j ← 0
    firstchannel ← 1
    length_perchannel ← L_FlocTank/N_FlocTankChannels
    while n ≤ sum(N_FlocBaffles) - 1
        if j > N_FlocBaffles[k] - 1 and k ≠ 2
            k ← k + 1
            j ← 0
        if firstchannel == 1
            baffle_xposition1[n] ← S_FlocBaffle[k] if n == 0
            baffle_xposition1[n] ← baffle_xposition1[n - 1] + S_FlocBaffle[k] otherwise
            if baffle_xposition1[n] > length_perchannel - S_FlocBaffle[k]
                baffle_xposition1 ← submatrix(baffle_xposition1, 0, n - 1, 0, 0)
                firstchannel ← 0
                n ← n - 1
                m ← 0
        if firstchannel == 0
            baffle_xposition2[m] ← length_perchannel - S_FlocBaffle[k] if m == 0
            baffle_xposition2[m] ← baffle_xposition2[m - 1] - S_FlocBaffle[k] otherwise
        m ← m + 1
        n ← n + 1
        j ← j + 1
    if baffle_xposition2[m - 1] ≥ 2*S_FlocBaffle[k]
        while baffle_xposition2[m - 1] ≥ 2*S_FlocBaffle[k]
            baffle_xposition2[m] ← baffle_xposition2[m - 1] - S_FlocBaffle[k]
            h ← h + 1
            m ← m + 1
    otherwise
        while baffle_xposition2[m - 1] < S_FlocBaffle[k]
            baffle_xposition2 ← submatrix(baffle_xposition2, 0, m - 2, 0, 0)
            h ← h - 1
            m ← m - 1
    numbaffles ← length(baffle_xposition2) + length(baffle_xposition1)
    p ← 1
    y ← 0
    t ← 0
    N_FlocBafflesfirst ← N_FlocBaffles[0]
    N_FlocBafflesthird ← N_FlocBaffles[2] + h
    N_FlocBafflessecond ← numbaffles - (N_FlocBafflesfirst + N_FlocBafflesthird)
    N_FlocBafflesnew ← [N_FlocBafflesfirst; N_FlocBafflessecond; N_FlocBafflesthird]
    while t ≤ numbaffles - 1
        if p > N_FlocBafflesnew[y]
            y ← y + 1
            p ← 1
        bafflelength[t, 0] ← L_FlocBaffleDown[y] if mod(t + 1, 2) ≠ 0
        bafflelength[t, 0] ← L_FlocBaffleUp[y] otherwise
        p ← p + 1
        t ← t + 1
    firstchannel ← 1
    m ← 0
    i ← 0
    while i < length(baffle_xposition1)
        j ← 0
        if mod(i + 1, 2) == 0
            while j < 3
                baffleposition1[i, j] ← baffle_xposition1[i] if j == 0
                baffleposition1[i, j] ← 0 if j == 1
                baffleposition1[i, j] ← bafflelength[i] if j == 2
                j ← j + 1
            i ← i + 1
        otherwise
            while j < 3
                baffleposition1[i, j] ← baffle_xposition1[i] if j == 0
                baffleposition1[i, j] ← H_FlocTank if j == 1
                baffleposition1[i, j] ← H_FlocTank - bafflelength[i] if j == 2
                j ← j + 1
            i ← i + 1
    while m < length(baffle_xposition2)
        j ← 0
        if mod(i + 1, 2) ≠ 0
            while j < 3
                baffleposition2[m, j] ← baffle_xposition2[m] if j == 0
                baffleposition2[m, j] ← H_FlocTank if j == 1
                baffleposition2[m, j] ← H_FlocTank - bafflelength[i] if j == 2
                j ← j + 1
            i ← i + 1
            m ← m + 1
        otherwise
            while j < 3
                baffleposition2[m, j] ← baffle_xposition2[m] if j == 0
                baffleposition2[m, j] ← 0 if j == 1
                baffleposition2[m, j] ← bafflelength[i] if j == 2
                j ← j + 1
            i ← i + 1
            m ← m + 1
    Po_FlocBaffle ← [baffleposition1, baffleposition2]
    numbafflesin2 ← length(baffle_xposition2)
    S_FlocBaffleLast ← baffle_xposition2[numbafflesin2 - 2] - baffle_xposition2[numbafflesin2 - 1]
    return [Po_FlocBaffle, length(bafflelength), N_FlocBafflesnew, S_FlocBaffleLast]
# initializes variables and assigns initial values
# the length of each channel is equal to the length of one sed tank
# this while loop finds the x position of each baffle (x=0 at start of tank)
# this if statement determines what baffle spacing should be used to find the position of the next baffle. k (0,1,2) will be equal to the current baffle spacing and increments after all the baffles of a specific spacing have been assigned an x value.
# first assign the x positions for the baffles in channel 1
# for the first baffle, the position is just equal to the baffle spacing. The positions of the rest of the baffles are equal to the position of the previous baffle plus the baffle spacing.
# This if statement makes sure that the baffle that was just assigned an x position is not too close to the wall at the end of the channel (ie, closer than a baffle spacing). If it is too close this baffle is taken out and reassigned in the next channel.
# Now the x positions of the second channel are calculated. The x positions are still relative to a datum set at the start of the FIRST channel, however the positions are determined from the start of THIS channel to the end of THIS channel (ie backwards). The first baffle is at a position equal to the tank length minus the baffle spacing and the rest of the baffle have an x coordinated equal to the position of the previous baffle minus baffle spacing.
# increments the counter variables
# This loop adds baffles if the length of the channel is longer than baffle spacing * number of baffles. The baffles added have a spacing equal to the last baffle spacing. A baffle should be added if the space left is greater than 2*baffle spacing. This will ensure that the space between the wall and the last baffle is greater than or equal to the desired baffle spacing. This loop adds as many baffles as are needed. h keeps track of how many baffles are added or subtracted
# This loop takes out baffles if the length of the channel is shorter than baffle spacing * number of baffles. The baffles are taken out of the last section. A baffle needs to be taken out if the space between it and the wall is less than the desired baffle spacing. This loops takes out all extra baffles.
# initializes variables and sets initial values
# These statements create a new vector of the number of baffles per section. It is assumed that no baffles in the first section were removed (based on testing of the code this is a valid assumption). It then determines how many baffles are left in the third spacing based on the number added or removed above. Finally, it calculates the number of baffles in the second section based on the total number of baffles in the tank minus the number of baffles in section 1 and 3.
# This loop creates a vector of baffle lengths
# checks to see what spacing (and thereby what length) each baffle is. Must determine if the baffle is an upper or lower baffle to make sure it gives the vector the correct length.
# increments counter variables
# initializes variables and sets initial values
# this loop assigns three coordinates for each baffle in the 1st channel. The first column is the x coordinate and the 2nd and 3rd columns are the starting and ending points (y coordinates) of a baffle. Note: The first baffle always starts at the floor and extends upward. The datum for the y coordiante is set at the water level with down as the positive direction.
# an even numbered baffle gets these coordinates. These baffles extend from the top of the tank downward.
# an odd numbered baffle gets these coordinates. These baffles extend from the bottom of the tank upward.
# this loop assigns three coordinates for each baffle in the 2nd channel
# an odd numbered baffle gets these coordinates. These baffles extend from the bottom of the tank upward.
# an even numbered baffle gets these coordinates. These baffles extend from the top of the tank downward.
# increments counter variables
# creates a single matrix containing the baffle coordinates for each channel
# determines the number of baffles in the 2nd channel
# determines the space between the last two baffles in the 2nd channel
# This function returns 2 matrices (one for each channel) with the coordinates for each baffle. This will be used by the autoCAD team to draw the baffles. It also return the total number of baffles in the tank and the number of baffles per baffle spacing.
bafflepositions_2channels([14.426; 0.534; 2.169], [16; 4; 2], [1.612; 1.234; 0.99], [1.612; 1.234; 0.99], [0.232; 0.484; 0.685]) = ƒ([Unitless]) → [[[Unitless]]]
# This function creates a matrix for two channels (if only one is needed) giving the x and y coordinates of each baffle. The function is called below by the flocculator function. (Note: this function will NOT work for any number of flocculator channels). This function is called when the length needed by the baffles is less tha than a single channel length.
bafflepositions_1channel(L_FlocTank, H_FlocTank, W_FlocTank, N_FlocBaffles, N_FlocTankChannels, L_FlocBaffleUp, L_FlocBaffleDown, S_FlocBaffle) :=
    k ← 0
    j ← 0
    firstchannel ← 1
    length_perchannel ← L_FlocTank/N_FlocTankChannels
    baffle_xposition1[0] ← S_FlocBaffle[k]
    n ← 1
    while baffle_xposition1[n - 1] < length_perchannel - (2*S_FlocBaffle)[2]
        if j > N_FlocBaffles[k] - 1 and k ≠ 2
            k ← k + 1
            j ← 0
        baffle_xposition1[n] ← baffle_xposition1[n - 1] + S_FlocBaffle[k] if firstchannel == 1
        n ← n + 1
        j ← j + 1
    baffle_xposition2[0] ← length_perchannel - S_FlocBaffle[k]
    m ← 1
    while baffle_xposition2[m - 1] ≥ 2*S_FlocBaffle[k]
        baffle_xposition2[m] ← baffle_xposition2[m - 1] - S_FlocBaffle[k]
        m ← m + 1
    numbaffles ← length(baffle_xposition2) + length(baffle_xposition1)
    p ← 1
    y ← 0
    t ← 0
    N_FlocBafflesnew ← [N_FlocBaffles[0]; N_FlocBaffles[1]; numbaffles - N_FlocBaffles[0] - N_FlocBaffles[1]]
    while t ≤ numbaffles - 1
        if p > N_FlocBafflesnew[y]
            y ← y + 1
            p ← 1
        bafflelength[t, 0] ← L_FlocBaffleDown[y] if mod(t + 1, 2) ≠ 0
        bafflelength[t, 0] ← L_FlocBaffleUp[y] otherwise
        p ← p + 1
        t ← t + 1
    firstchannel ← 1
    m ← 0
    i ← 0
    while i < length(baffle_xposition1)
        j ← 0
        if mod(i + 1, 2) == 0
            while j < 3
                baffleposition1[i, j] ← baffle_xposition1[i] if j == 0
                baffleposition1[i, j] ← 0 if j == 1
                baffleposition1[i, j] ← bafflelength[i] if j == 2
                j ← j + 1
            i ← i + 1
        otherwise
            while j < 3
                baffleposition1[i, j] ← baffle_xposition1[i] if j == 0
                baffleposition1[i, j] ← H_FlocTank if j == 1
                baffleposition1[i, j] ← H_FlocTank - bafflelength[i] if j == 2
                j ← j + 1
            i ← i + 1
    while m < length(baffle_xposition2)
        j ← 0
        if mod(i + 1, 2) ≠ 0
            while j < 3
                baffleposition2[m, j] ← baffle_xposition2[m] if j == 0
                baffleposition2[m, j] ← H_FlocTank if j == 1
                baffleposition2[m, j] ← H_FlocTank - bafflelength[i] if j == 2
                j ← j + 1
            i ← i + 1
            m ← m + 1
        otherwise
            while j < 3
                baffleposition2[m, j] ← baffle_xposition2[m] if j == 0
                baffleposition2[m, j] ← 0 if j == 1
                baffleposition2[m, j] ← bafflelength[i] if j == 2
                j ← j + 1
            i ← i + 1
            m ← m + 1
    Po_FlocBaffle ← [baffleposition1, baffleposition2]
    S_FlocBaffleLast ← S_FlocBaffle[2]
    return [Po_FlocBaffle, length(bafflelength), N_FlocBafflesnew, S_FlocBaffleLast]  # initializes the variables
# the length of each channel is the total length divided by the number of channels
# the position of the first baffle in the first channel is equal to the first baffle spacing
# This loop continues to place baffles in the first channel until there is no room left (ie there is less than 2 times the biggest baffle spacing free at the end of the channel). If fewer baffles are needed than the length of the tank it places extra ones at the biggest spacing.
# This if statement checks to see which baffle spacing should be used
# This places the first baffle in the second channel at a x location of the length of the channel minus the biggest baffle spacing.
# This loop places the rest of the baffles in the second channel (all at the biggest baffle spacing). It starts where the water comes in  (ie at x = channel length) and ends where the water exits the flocculation (ie at x = 0).
# This determines the number of baffles in the tank
# initializes counter variables
# finds a new matrix of baffles per baffle spacing. It is assumed that the first two spacings have the same number of baffles as predicted, howerver, the third spacing should have more. Therefore, the number of baffles in the third section is equal to the total number of baffles minus the number of baffles in sections 1 and 2.
# This loop creates a vector of baffle lengths
# checks to see what spacing (and thereby what length) each baffle is. Must determine if the baffle is an upper or lower baffle to make sure it gives the vector the correct length.
# increments counter variables
# initializes variables and sets initial values
# this loop assigns three coordinates for each baffle in the 1st channel. The first column is the x coordinate and the 2nd and 3rd columns are the starting and ending points (y coordinates) of a baffle. Note: The first baffle always starts at the floor and extends upward. The datum for the y coordiante is set at the water level with down as the positive direction.
# an even numbered baffle gets these coordinates. These baffles extend from the top of the tank downward.
# an odd numbered baffle gets these coordinates. These baffles extend from the bottom of the tank upward.
# this loop assigns three coordinates for each baffle in the 2nd channel
# an odd numbered baffle gets these coordinates. These baffles extend from the bottom of the tank upward.
# an even numbered baffle gets these coordinates. These baffles extend from the top of the tank downward.
# increments counter variables
# This function returns 2 matrices (one for each channel) with the coordinates for each baffle. This will be used by the autoCAD team to draw the baffles. It also return the total number of baffles in the tank and the number of baffles per baffle spacing.
bafflepositions_1channel([15; .5; 2.5], [10; 6; 4], [1.6; 1.3; 1.1], [1.6; 1.3; 1.1], [.1; .3; .5]) = ƒ([Unitless], [Unitless], [Unitless]) → [[[Unitless]]]
# This function checks to see if the Gθ value for the flocculator has fallen too low after baffles were removed to fit the flocculator in the tank.
# This recalculates the Gθ for the entire tank based on the actual number of baffles in the tank.
Gθmin_check(N_FlocBaffleTotal, W_FlocTank, Q_Plant, Pi_QPlant) :=
    newGθ_total ← N_FlocBaffleTotal*sqrt(K_FlocBaffle180*Q_Plant*Pi_QPlant*Pi_FlocDissipation/(2*NU*W_FlocTank))
    return "Failure: Your Gθ for the flocculator is too low. It should not fall below 4500. Consider increasing the flowrate or flocculator length." if newGθ_total < Gt_FlocAbsmin
    return newGθ_total otherwise  # error: This variable is undefined.
# returns a 1 if the new Gθ is less than the minimum required Gθ, requires a 0 otherwise.
Gθmin_check(30, 0.5*m, 200*gpm, 1) =  # error: This variable is undefined.
# This is the main flocculator function. It is called by the Master Program and returns the necessary outputs to the master program. It calls the subprograms when needed.
flocculator(Q_Plant, H_SedTank, W_SedTank, L_SedTank) :=
    L_FlocTank ← L_SedTank*N_FlocTankChannels
    W_FlocTank ← W_SedTank/N_FlocTankChannels
    H_FlocEnd ← H_SedTank - H_PlantFreeboard
    b_spacing ← (1/G)^(1/2)*(K_FlocBaffle180*Q_Plant^3/(2*Pi_FlocDissipation*NU*W_FlocTank^3))^(1/4)*1/m
    S_FlocBaffle ← round(b_spacing, 2)*m
    G_FlocMin ← G*Pi_QPlant^(3/2)
    θ ← Pi_FlocDissipation*W_FlocTank*S_FlocBaffle^2/Q_Plant
    θ_min ← Pi_FlocDissipation*W_FlocTank*S_FlocBaffle^2/(Q_Plant*Pi_QPlant)
    Gθ_persection ← Gt_FlocMin/length(G)
    Gθ_lowflow ← 0
    Gθ_highflow ← 0
    for i ∈ 0 .. last(G)
        N_FlocBaffle[i] ← floor(Gθ_persection/(G_Floc[i]*θ[i])) if i < last(G_Floc)
        N_FlocBaffle[i] ← ceil((Gt_FlocMin - Gθ_lowflow)/(G_FlocMin[i]*θ_min[i])) otherwise
        Gθ_lowflow ← Gθ_lowflow + N_FlocBaffle[i]*sqrt(K_FlocBaffle180*Q_Plant*Pi_QPlant*Pi_FlocDissipation/(2*NU*W_FlocTank))
        Gθ_highflow ← Gθ_highflow + N_FlocBaffle[i]*sqrt(K_FlocBaffle180*Q_Plant*Pi_FlocDissipation/(2*NU*W_FlocTank))
    L_FlocBafflesOnlyes ← S_FlocBaffle*N_FlocBaffle
    v ← Q_Plant/(W_FlocTank*S_FlocBaffle)
    h_l ← vectorize(N_FlocBaffle*(K_FlocBaffle180*v^2/(2*g)))
    total_hl ← sum(h_l)
    d_start ← H_FlocEnd + total_hl
    H_FlocTank ← d_start + H_PlantFreeboard
    floc_dim ← [L_FlocTank; W_FlocTank; H_FlocTank]
    [L_FlocBaffleDown, L_FlocBaffleUp] ← shortcircuit(S_FlocBaffle/m, H_FlocEnd, H_FlocTank)
    twochannels ← 0
    twochannels ← 1 if L_FlocBafflesOnly ≥ L_FlocTank/N_FlocTankChannels - S_FlocBaffle[2]
    [Po_FlocBaffle, N_FlocBaffleTotal, N_FlocBafflesnew, S_FlocBaffleLast] ← bafflepositions_1channel(floc_dim/m, N_FlocBaffle, L_FlocBaffleUp/m, L_FlocBaffleDown/m, S_FlocBaffle/m) if twochannels == 0
    [Po_FlocBaffle, N_FlocBaffleTotal, N_FlocBafflesnew, S_FlocBaffleLast] ← bafflepositions_2channels(floc_dim/m, N_FlocBaffle, L_FlocBaffleUp/m, L_FlocBaffleDown/m, S_FlocBaffle/m) if twochannels == 1
    W_FlocUturnHolel ← uturnhole(S_FlocBaffle/m, W_FlocTank, L_FlocTank, N_FlocBafflesnew, S_FlocBaffleLast)[0, 0]
    H_FlocUturnHolel ← uturnhole(S_FlocBaffle/m, W_FlocTank, L_FlocTank, N_FlocBafflesnew, S_FlocBaffleLast)[1, 0]
    Gθ_newmin ← Gθmin_check(N_FlocBaffleTotal, W_FlocTank, Q_Plant, Pi_QPlant)
    return [floc_dim/m, S_FlocBaffle/m, N_FlocBaffleTotal, HL_FlocTankTotal/m, W_FlocUturnHolel/m, H_FlocUturnHolel/m, Po_FlocBaffle, Gθ_newmin, N_FlocBafflesnew, L_FlocBafflesOnly/m]  # error: This variable is undefined.
# The length of one channel of the flocculator is equal to the length of a sed tank . Therefore the total length is equal to the number of channels times the length of a sed tank. The width of a flocculator is equal to the width of a sed tank divided by the number of channels (to make "upward velocity" equal in the two tanks. The water depth at the end of the flocculaor must be the same as the water depth in the sed tank.
L_FlocTank := L_SedTank*N_FlocTankChannels = 7.092 m
W_FlocTank := W_SedTank/N_FlocTankChannels = 0.5 m
H_FlocEnd := H_SedTank - H_PlantFreeboard = 2.02942 m
# calculates the baffle spacing based on desired G value
S_FlocBaffle := (1/G_Floc)^(1/2)*(K_FlocBaffle180*Q_Plant^3/(2*Pi_FlocDissipation*NU*W_FlocTank^3))^(1/4) = [12.8245; 18.1366; 37.9068] cm
# calculates the min G value based on the velocity at low flow
G_FlocMin := G_Floc*Pi_QPlant^(3/2) = [58.6899; 29.3449; 6.71751] 1/s
# Calculates the design residence time for the flocculator
θ := Pi_FlocDissipation*W_FlocTank*S_FlocBaffle^2/Q_Plant = [1.52993; 3.05986; 13.3668] s
# Calculates the minimum residence time for the flocculator
# This divides the minumum allowable value of Gθ for the entire tank by the number of baffle spacings. Each baffle spacing will be responsible for a certain amount of the Gθ.
θ_min := θ/Pi_QPlant = [3.05986; 6.11972; 26.7335] s
Gθ_persection := Gt_FlocMin/length(G_Floc) = 1666.67
# This loop determines the number of baffles in each spacing. The number of baffles in the first two spacings is determined by the Gθ value at the design flowrate. This is to ensure that G values do not get too high and flocs are not broken up. The number of baffles in the third spacing is determined by Gθ at low flow rate. This ensures that the Gθ value for the entire tank is high enough to guarentee proper flocculation.
Gt_FlocBaffleMin := sqrt(Pi_FlocDissipation*Pi_QPlant*Q_Plant*K_FlocBaffle180/(2*NU*W_FlocTank)) = 179.583
N_FlocBaffle := ceil(Gt_FlocMin/Gt_FlocBaffleMin) = 28
N_FlocBaffleSection :=
    for i ∈ 0 .. last(G_Floc) - 1
        N[i] ← floor(N_FlocBaffle/length(G_Floc))
    N[last(G_Floc)] ← N_FlocBaffle - sum(N)
    return N
N_FlocBaffleSection = [9; 9; 10]
V_Floc := Q_Plant/(W_FlocTank*S_FlocBaffle) = [0.167648; 0.118545; 0.056718] m/s
# This tracks of the cummulative Gθ value at high and low flow rates respectively.
HL_FlocBaffle := h_erect(Q_Plant, W_FlocTank, S_FlocBaffle, K_FlocBaffle180) = [0.4299; 0.21495; 0.0492054] cm
# determines the length the flocculator would need to be if determined by the number fo baffles and their respective baffle spacings
# finds the velocity per baffle spacing based on the flow rate and the flow area of each baffle spacing
HL_Floc := sum(vectorize(N_FlocBaffleSection*HL_FlocBaffle)) = 6.2957 cm
HW_FlocStart := HW_Sed + HL_Floc = 2.09238 m
# calculates the head loss per baffle and then finds the total headloss This headloss calculation is not based on the actual number of baffles at each spacing, but change should be so small that difference in negligible.
L_FlocSection := vectorize(N_FlocBaffleSection*S_FlocBaffle) = [1.1542; 1.63229; 3.79068] m
L_FlocIdeal := sum(L_FlocSection) = 6.57718 m  # not including port!
# G at the port is based on the G at the end of the flocculator because the low G region of the flocculator is so long.
W_FlocPort := S_FlocBaffle[last(G_Floc)] = 0.379068 m
H_FlocPort := W_FlocTank*S_FlocBaffle[last(G_Floc)]/W_FlocPort = 0.5 m
# the water height at the end of the tank will be less than the water height at the beginning due to head loss. The tank must be deep enough so that water does not overfloww at the beginning. Additionally, there is 10 cm of free space between the water surface and the top of the tank
# Now we need to assign positions, lengths and elevations to floc baffles
L_FlocBaffleLower := HW_Sed - S_FlocBaffle*Pi_FlocBaffle = [1.83706; 1.75737; 1.46082] m
# matrix of flocculator dimensions (length, height, width)
L_FlocBaffleUpper := HW_FlocStart + H_PlantFreeboard - S_FlocBaffle*Pi_FlocBaffle = [2.00001; 1.92033; 1.62378] m
Z_FlocBaffleUpper := S_FlocBaffle*Pi_FlocBaffle = [0.192367; 0.272049; 0.568602] m
Z_FlocBaffleLower[last(G_Floc)] := 0*m
Z_FlocBaffleLower = [0; 0; 0] m
# First baffle is a lower baffle because rapid mix pipe enters low
# Ideally have odd number of baffles in first channel (enter low, exit low)
# Ideally have even number of baffles in 2nd channel (enter low, exit high)
# calls the function which checks for short circuiting and determines the baffle length for each spacing
X_FlocBaffle :=
    □  # error: This placeholder is empty.
# This determines if two channels are actually necessray (alhough two channels are always used). Seperate functions calculate the baffle coordinates in each case.
# This calls the correct function that finds the coordinates of each baffle.
# calls the function which finds the dimensions of the uturn hole
# This calls the function to check the new Gθ minimum value. The function returns either a 0 (Gθ is ok) or a 1 (Gθ is too low). If a 1 is returned, the function gives an error message to the user
# This function returns: dimensions of the flocculator, baffles spacings, total number of baffles, headloss through the tank, dimensions of the uturn hole, and baffle lengths)
flocculator(400*gpm, [7.213; 1.067; 2.06]) =  # error
