C_clay := 10*mg/L
d_maxfloc := 5 mm
d_initialfloc := 1 μm  # based on assumption that floc grow rapidly to this size from molecular diffusion.
# Shear strength of aluminum hydroxide floc. Estimated to be approximately 0.8 Pa from both floc model and rapid sand filter model. We will use a value of 2 Pa for the homework assignment
α := 1
τ_AlOH3 := 0.8 Pa
## Lots of constants
# α is a constant used to increase the time required per collision. It could represent a constant of proportionality that was missing from the dimensional analysis or it could represent the efficiency of attachment.
ρ_clay := 2650*kg/m^3
ρ_H2O := 1000*kg/m^3
ν := 1*10^-6*m^2/s
d_clay := 3.5 μm
Al := 27*gm/mol
S := 32.064*gm/mol
O := 16*gm/mol
H := 1.008*gm/mol
MW_alum := 2*Al + 3*(S + 4*O) + 14.3*(2*H + O)
MW_alum = 599.821 gm/mol  # Al2(SO4)3*14.3H2O
MW_AlOH3 := Al + 3*(O + H)
# Given alum dose find alum hydroxide concentration
C_AlOH3 := C_alum/MW_alum*2*MW_AlOH3 = 5.20315 mgm/L  # error: This variable is undefined.
Mole_Al(C_alum) := C_alum/MW_alum*2
## Model Equations
G := 60/s
d := 3 mm
Re(G, d) := G*d^2/(2*ν)
Re(G, d) = 270
# drag coefficient for a sphere in the transition region between laminar flow and fully turbulent flow
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C_Dtransition(Re) :=
    24/Re if Re == 0
    24/Re + 3/sqrt(Re) + 0.34 otherwise
τ_floc := C_Dtransition(Re(G, d))*ρ_H2O*G^2*d^2/8 = 2.47643 Pa
ϕ_floc(C_alum) := 120*L/mole*Mole_Al(C_alum)  # Letterman and Iyer (1985) from Water Quality and Treatment page 6.55
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D_floc(d_initialfloc, collisions) := d_initialfloc*(2^collisions)^(1/3)
t_collision(C_alum, G, α) := 1/(α*G*ϕ_floc(C_alum))
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n_collisions(d_floc, d_initialfloc) := log((d_floc/d_initialfloc)^3)/log(2)
n_collisions(5 mm, 1 μm) = 36.8631
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G_max(d_initialfloc, τ_AlOH3, collisions) :=
    D ← D_floc(d_initialfloc, collisions)
    G_prev ← 1000/s
    error ← 1
    while error > 0.001
        G_new ← 1/D*sqrt(8*τ_AlOH3/(ρ_H2O*C_Dtransition(G_prev*D^2/(2*ν))))
        error ← |G_new - G_prev|/mean(G_new, G_prev)
        G_prev ← G_new
    return G_new
Gθ(d_initialfloc, C_alum, τ_AlOH3, α, collisions) :=
    Gθ ← 0
    for i ∈ 0 .. collisions
        G ← G_max(d_initialfloc, τ_AlOH3, i)
        Gθ ← Gθ + G*t_collision(C_alum, G, α)
    return Gθ
θ(d_initialfloc, C_alum, τ_AlOH3, α, collisions) :=
    θ ← 0 s
    for i ∈ 0 .. collisions
        G ← G_max(d_initialfloc, τ_AlOH3, i)
        θ ← θ + t_collision(C_alum, G, α)
    return θ
collisions := 0 .. ceil(n_collisions(d_maxfloc, d_initialfloc))
G_maxdesignparametric(τ_AlOH3, α, C_alum, d_maxfloc, d_initialfloc) :=
    for i ∈ 0 .. ceil(n_collisions(d_maxfloc, d_initialfloc))
        G_maxdesign[i] ← G_max(d_initialfloc, τ_AlOH3, i)
    return G_maxdesign
Gθ_design(τ_AlOH3, α, C_alum, d_maxfloc, d_initialfloc) :=
    collisions ← ceil(n_collisions(d_maxfloc, d_initialfloc))
    for i ∈ 0 .. collisions
        Gθ_design[i] ← Gθ(d_initialfloc, C_alum, τ_AlOH3, α, i)
    return Gθ_design
G_maxdesign(Gθ, τ_AlOH3, α, C_alum, d_maxfloc, d_initialfloc) := linterp(Gθ_design(τ_AlOH3, α, C_alum, d_maxfloc, d_initialfloc), G_maxdesignparametric(τ_AlOH3, α, C_alum, d_maxfloc, d_initialfloc), Gθ)
Gθ_max(τ_AlOH3, α, C_alum, d_maxfloc, d_initialfloc) := Gθ_design(τ_AlOH3, α, C_alum, d_maxfloc, d_initialfloc)[ceil(n_collisions(d_maxfloc, d_initialfloc))]
C_alum := 10*mg/L
α = 1
d_maxfloc = 0.005 m
d_initialfloc = 1e-6 m
# Design Curve
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Gθ_max(τ_AlOH3, α, C_alum, d_maxfloc, d_initialfloc) = 9497.16
τ_AlOH3 = 0.8 Pa
C_alum = 10 mgm/L
α = 1
GθfromG(G, τ_AlOH3, α, C_alum, d_maxfloc, d_initialfloc) := linterp(reverse(G_maxdesignparametric(τ_AlOH3, α, C_alum, d_maxfloc, d_initialfloc)), reverse(Gθ_design(τ_AlOH3, α, C_alum, d_maxfloc, d_initialfloc)), G)
GθfromG(120/s, τ_AlOH3, α, C_alum, d_maxfloc, d_initialfloc) = 5286.94
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d_flocRe := 2*ν*ρ_H2O*sqrt(3/(ρ_H2O*τ_floc)) = 69.611 μm
i := 0 .. 150
Re(133/s, 1 μm) = 6.65e-5
Re[i] := 0.001*(1.1^i + 1)
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d := 1 μm
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G_lowRe := τ_floc/(6*ρ_H2O*ν) = 412.738 1/s
