# Low Flow AguaClara Design Tool
Q_Plant := 5*L/s
HL_FlocMax := 40 cm
H_SedSlopesToFlocWeirMin := 25 cm
T_FlocSlab := 15 cm
T_SedWall := 15 cm
T_FlocWall := 15 cm
T_FiBoxWall := 15 cm
T_PlantWall := 15 cm
T_PlantFloor := 20 cm
T_ChemSlab := 15 cm
C_CoagDoseMax := 40*mg/L
C_ChlorDoseAve := 1*mg/L
Q_Filter := Q_Plant/2
# Input variables that are irrelevant for this design but need to be defined with arbitrary values for design files to run:
T_SedDividingWall := T_SedWall
T_SedChannelWall := T_SedWall
method := "EtFlocSedFiLow"
Mod := 0
# Plant design calculations:
# [reference: ExpertInputs.xmcd]
# [reference: MathFunctions.xmcd]
# [reference: PipeDatabase.xmcd]
# [reference: MaterialsDatabase.xmcd]
# [reference: FluidsFunctions.xmcd]
# [reference: SedimentationTank.xmcd]
# [reference: LFOM.xmcd]
# These are reference listed here that are not actually needed for this design, but were included:
# [reference: EntranceTankFlocculatorLow.xmcd]
# [reference: StackedRapidSandFilterLow.xmcd]
# [reference: ChemicalDoseController.xmcd]
# Enclosed Stacked Rapid Sand Filter
# Dimensions and pipe sizes
N_Fi := □  # error: This placeholder is empty.  # Always assume two filters
H_FiLayerLow := 0.2 m
Q_Fi = 0.0025 m^3/s
# Added for test:
ND_FiPipeArray := [12; 18; 24; 30; 36]*in
ND_FiPipe := ND(CeilNearest(D_circle(Q_Fi/V_FiBw), AvailID(SDR_26)), SDR_26) = 24 in
# how was this minimum determined
# specifically trunk
ND_FiManTrunkMinLow := 1.5 in
N_FiManBranchLow := 6  # number of branches on either side
N_FiInletPipesLow := 4  # Fixed in rst file to accoutn for n_branches as a fucntion of pipe diameter b/c of flow
ND_BallValve := 3 in
ND_FiManBranchMinLow := 1 in
N_FiOutletPipesLow := 3
ND_BedTester := 1/2*in
ND_FiBwTrunkMinLow := 2 in
ND_BedTesterOuter := 1 in
ND_FiBwBranchMinLow := 1 in
ND_FiAirRelValve := 1/2*in
A_Fi := ID(ND_FiPipe, SDR_26)^2/4*π = 0.279091 m^2
# Layer thickness as function of trunk diameter (DNE)
# This section was deleted becasue the sand layer height will be 20cm as long as the trunk diameters are less than 6 in which they alwasy are in EStaRS. In the OStaRS they are still necessary to have.
# There are three flow distribution problems in the filter design: distribution between the slots along a manifold branch, distribution between branches along a trunk, and distribution between filter layers. The first two are both addressed by making pressure recovery in the manifold (both trunks and branches) small relative to the short path head loss (head loss through the clean bed, since slot head loss in forward filtration is small). In backwash mode where there is no bed head loss, the pressure recovery in the manifold plumbing must be small relative to slot head loss.
#
# Head loss through the inlet and outlet plumbing differs for different layers both because the number of elbows varies and because the top and bottom inlets have 1/2 the flow of the middle two. Therefore good flow distribution between layers would be addressed by making head loss through the inlet and outlet plumbing small for all layers relative to clean bed head loss. We do not have an explicit constraint set for this, but the constraint on trunk diameter which gives good flow distribution within the manifolds seems to be sufficient to take care of it. As a check, see the analysis under the section "Path Head Loss Calculations and Flow Distribution Between Layers" below.
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Pi_FiManifoldQ := 0.85  # Ratio of long path flow to short path flow
Pi_FiManifoldHeadLoss := 1 - Pi_FiManifoldQ^2 = 0.2775
# Ratio of pressure recovery in the slotted pipes to the head loss through the clean bed (or through the slots in backwash mode)
# Even though the piezometric head profiles for the inlet and outlet manifolds on the middle layers may be parallel meaning that pressure recovery there need not be small for good distribution between sand bed flow paths, we still need pressure recovery to be small in the outlet manifolds in order to get good flow distribution in the top and bottom layers where the velocity in the manifolds is 1/2 and the pressure recovery 1/4 that of other layers (even smaller in the larger-diameter bottom manifold where velocity head is tiny).
# Flow distribution constraints: ratio of pressure recovery to clean bed head loss
Q_FiMax := V_FiBw*A_Fi = 3.07001 L/s
N_Fi = 2
Q_Fi = 0.0025 m^3/s  # The flow will be divided evenly between the N_Fi = 2 filters.
A_FiActive := A_Fi = 0.279091 m^2
Q_FiLayer := Q_Fi/N_FiLayer = 0.416667 L/s  # This is the flow rate through each filter layer
Q_FiBw := V_FiBw*A_Fi = 3.07001 L/s
ND_FiManTrunkMinLow = 1.5 in
H_FiLayer := H_FiLayerF(ND_FiManTrunkMinLow) = 20 cm  # These functions don't need to go in the EstaRS design because we will not need a trunk greater than 6in
H_FiLayer := H_FiLayerF(6 in) = 20 cm
# Filter Flow Rates and Layer Height
# Filter Trunk and Branch Diameters (one or two branch model)
# how much of this is necessary to port into python, if im doing it ill know which things are ND and which are ID but others may not. Also does it saying "man" in it mean anything?
Q_FiBwBranchMax := Q_FiBw/(2*N_FiManBranchLow)
Q_FiBranchMax := 2*Q_FiLayer/(2*N_FiManBranchLow)
A_FiBranchMin := ID(ND_FiManBranchMinLow, SDR_26)^2*π/4
A_FiBwBranchMin := ID(ND_FiBwBranchMinLow, SDR_26)^2*π/4
# because this is a max over a min, should it be characterized as a max?
V_FiManBranchEst := Q_FiBranchMax/A_FiBranchMin = 0.0992669 m/s
V_FiBwManBranchEst := Q_FiBwBranchMax/A_FiBwBranchMin = 0.3657 m/s
PR_FiManBranchEst := V_FiManBranchEst^2/(2*g) = 0.050241 cm
PR_FiBwManBranchEst := V_FiBwManBranchEst^2/(2*g) = 0.681866 cm
# Trunks or trunks and branches??? seems that branches are taken into account.
# First constraint: pressure recovery in trunks during forward filtration
HL_FiCleanLayerMin := h_lKozeny(H_FiLayer, D_FiSand60, Q_FiLayer/A_Fi, ε_FiSand, Nu_Water) = 4.52938 cm
PR_FiManMax := HL_FiCleanLayerMin*Pi_FiManifoldHeadLoss
# I am confused about what this function does. What does  the difference in PR terms tell you? I have it. The maximum PR minus the branch PR tells you how much you have left for the trunk. Another line can get added in the rst so this is more clear . OK maybe not. Ok it is. Its the maximum allowable, not what it actually is.
V_FiManTrunkMaxPR := sqrt(2*g*(PR_FiManMax - PR_FiManBranchEst)) = 0.486484 m/s
ND_FiManTrunkLow := max(ND_FiManTrunkMinLow, ND(CeilNearest(D_circle(2*Q_FiLayer/V_FiManTrunkMaxPR), AvailID(SDR_26)), SDR_26)) = 2 in
# Oct 5 2018
PR_FiManMax - PR_FiManBranchEst = 0.0120666 m
PR_FiTrunk := (2*Q_FiLayer/(ID(ND_FiManTrunkLow, SDR_26)^2*π/4))^2/(2*g) = 0.00618491 m
# ALERT ALERT why is this a nominal diameter. ITS NOT aNY MORE. ceo edit on 10/10/18, other version has ND but that's correct.
ID(ND_FiManTrunkLow, SDR_26) = 0.0551942 m
ND_FiManTrunkLow = 0.0508 m
PR_FiTrunk = 0.00618491 m
PR_FiManBranchMax := PR_FiManMax - PR_FiTrunk = 0.00638412 m
V_FiManBranchMax := sqrt(2*g*PR_FiManBranchMax) = 0.353855 m/s
ND_FiManBranchLow := max(ND_FiManBranchMinLow, ND(CeilNearest(D_circle(2*Q_FiLayer/(2*N_FiManBranchLow)/V_FiManBranchMax), AvailID(SDR_26)), SDR_26)) = 1 in
PR_FiManBranch := (2*Q_FiLayer/(2*N_FiManBranchLow)/(ID(ND_FiManBranchLow, SDR_26)^2*π/4))^2/(2*g) = 0.00050241 m
PR_FiManTotal := PR_FiTrunk + PR_FiManBranch = 0.668732 cm
PR_FiManMax = 1.2569 cm
# Second constraint: pressure recovery in lowest trunk during backwash
# OH no, we are getting to slots vs holes. 10/11
HL_FiBwSlotsEst := 10 cm
PR_FiBwManMax := HL_FiBwSlotsEst*Pi_FiManifoldHeadLoss = 2.775 cm
# Start up time is ignored, we assume no headloss in the bed because fluidized but this doesn't actually happen instantaneously. it must be small or our other contraints conservative enough so that it doesn't effect this assumption 10/11
V_FiBwManTrunkMaxPR := sqrt(2*g*(PR_FiBwManMax - PR_FiBwManBranchEst)) = 0.640728 m/s
ND_FiBwTrunkLow := max(ND_FiBwTrunkMinLow, ND(CeilNearest(D_circle(Q_FiBw/V_FiBwManTrunkMaxPR), AvailID(SDR_26)), SDR_26)) = 3 in
PR_FiBwTrunk := (Q_FiBw/(ID(ND_FiBwTrunkLow, SDR_26)^2*π/4))^2/(2*g) = 1.76276 cm
PR_FiBwManBranchMax := PR_FiBwManMax - PR_FiBwTrunk = 1.01224 cm
V_FiBwManBranchMax := sqrt(2*g*PR_FiBwManBranchMax) = 0.445571 m/s
# Oct 10 18
ND_FiBwBranchLow := max(ND_FiBwBranchMinLow, ND(CeilNearest(D_circle(Q_FiBw/(2*N_FiManBranchLow)/V_FiBwManBranchMax), AvailID(SDR_26)), SDR_26)) = 1 in
PR_FiBwManBranch := (Q_FiBw/(2*N_FiManBranchLow)/(ID(ND_FiBwBranchLow, SDR_26)^2*π/4))^2/(2*g) = 0.681866 cm
PR_FiBwManTotal := PR_FiBwTrunk + PR_FiBwManBranch = 2.44462 cm
PR_FiBwManMax = 2.775 cm
# 10/17ish skip dis and ask ethan
# Many comments gort deleted because I didn't save enough
# Assuming trunk will have a male adpater whose threading feeds through the filter wall.
L_FiManTrunk := sqrt(ID(ND_FiPipe, SDR_26)^2 - OD_Fitting(ND_FiManTrunkLow)^2) - CapThickness(ND_FiManTrunkLow) = 0.588222 m
# What does this length actually mean? Looks like the distance formula
-different
-different
L_FiBwManTrunk := sqrt(ID(ND_FiPipe, SDR_26)^2 - OD_Fitting(ND_FiBwTrunkLow)^2) - CapThickness(ND_FiBwTrunkLow) = 0.581041 m
-same
L_FiManCapOffset := IR(ND_FiPipe, SDR_26) - OR_Fitting(ND_FiManBranchLow)/tan(asin(OD_Fitting(ND_FiManBranchLow)/ID(ND_FiPipe, SDR_26))) = 0.0661304 cm
L_FiBwManCapOffset := IR(ND_FiPipe, SDR_26) - OR_Fitting(ND_FiBwBranchLow)/tan(asin(OD_Fitting(ND_FiBwBranchLow)/ID(ND_FiPipe, SDR_26))) = 0.0661304 cm
-same
S_FiBranchFromWall := max(SocketDepth(ND_FiManTrunkLow), ID(ND_FiPipe, SDR_26) - L_FiManTrunk + SocketDepth(ND_FiManTrunkLow)) + OR(ND_FiManBranchLow) = 0.0705906 m
S_FiBwBranchFromWall := max(SocketDepth(ND_FiBwTrunkLow), ID(ND_FiPipe, SDR_26) - L_FiManTrunk + SocketDepth(ND_FiBwTrunkLow)) + OR(ND_FiBwManBranch) = 0.0780201 m
B_FiManBranch := 2*(IR(ND_FiPipe, SDR_26) - S_FiBranchFromWall)/(N_FiManBranchLow - 1) = 0.0909863 m
B_FiBwManBranch := 2*(IR(ND_FiPipe, SDR_26) - S_FiBwBranchFromWall)/(N_FiManBranchLow - 1) = 0.0880145 m
L_FiManBranchLow :=
    for i ∈ 0 .. N_FiManBranchLow - 1
        L[i] ←
            IR(ND_FiPipe, SDR_26)*sin(acos((IR(ND_FiPipe, SDR_26) - S_FiBranchFromWall - B_FiManBranch*i + OR_Fitting(ND_FiManBranchLow))/IR(ND_FiPipe, SDR_26))) - OR(ND_FiManTrunkLow) - CapThickness(ND_FiManBranchLow) if i < N_FiManBranchLow/2
            IR(ND_FiPipe, SDR_26) - IR(ND_FiManTrunkLow, Sch40) - L_FiManCapOffset - CapThickness(ND_FiManBranchLow) if i + 0.5 == N_FiManBranchLow/2
            L[N_FiManBranchLow - 1 - i] otherwise
    L
L_FiBwManBranchLow :=
    for i ∈ 0 .. N_FiManBranchLow - 1
        L[i] ←
            IR(ND_FiPipe, SDR_26)*sin(acos((IR(ND_FiPipe, SDR_26) - S_FiBwBranchFromWall - B_FiBwManBranch*i + OR_Fitting(ND_FiBwManBranch))/IR(ND_FiPipe, SDR_26))) - OR(ND_FiBwTrunkLow) - CapThickness(ND_FiBwManBranch) if i < N_FiManBranchLow/2
            IR(ND_FiPipe, SDR_26) - IR(ND_FiBwTrunkLow, SDR_26) - L_FiBwManCapOffset - CapThickness(ND_FiBwManBranch) if i + 0.5 == N_FiManBranchLow/2
            L[N_FiManBranchLow - 1 - i] otherwise
    L
L_FiManCouplingToFernco := SocketDepth(ND_FiManTrunkLow) + S_Fitting + FerncoCouplingLength(ND_FiManTrunkLow)/2
L_FiBwManCouplingToFernco := SocketDepth(ND_FiBwTrunkLow) + S_Fitting + FerncoCouplingLength(ND_FiBwTrunkLow)/2
# WITH ANNA's CODE
L_TeeThickness := 8.5 cm
L_PipeStubInside := 1.6 cm
L_FiManTrunk := 44.5 cm - L_PipeStubInside - CapThickness(ND_FiManTrunkLow) - 1.25 cm = 41.2531 cm
# Minus extra length to account for the pipe caps. These values (1.25cm, 3cm) were measured in the workshop.
L_FiBwManTrunk := 44.5 cm - L_PipeStubInside - CapThickness(ND_FiBwTrunkLow) - 3 cm = 39.265 cm
L_FiManCapOffset := IR(ND_FiPipe, SDR_26) - OR_Fitting(ND_FiManBranchLow)/tan(asin(OD_Fitting(ND_FiManBranchLow)/ID(ND_FiPipe, SDR_26))) = 0.0661304 cm
L_FiBwManCapOffset := IR(ND_FiPipe, SDR_26) - OR_Fitting(ND_FiBwBranchLow)/tan(asin(OD_Fitting(ND_FiBwBranchLow)/ID(ND_FiPipe, SDR_26))) = 0.0661304 cm
S_FiBranchFromWall := max(SocketDepth(ND_FiManTrunkLow), ID(ND_FiPipe, SDR_26) - L_FiManTrunk + SocketDepth(ND_FiManTrunkLow)) + OR(ND_FiManBranchLow) = 0.246282 m
S_FiBwBranchFromWall := max(SocketDepth(ND_FiBwTrunkLow), ID(ND_FiPipe, SDR_26) - L_FiManTrunk + SocketDepth(ND_FiBwTrunkLow)) + OR(ND_FiBwManBranch) = 0.253711 m
B_FiManBranch := 2*(IR(ND_FiPipe, SDR_26) - S_FiBranchFromWall)/(N_FiManBranchLow - 1) = 2.07098 cm
# Spacing between branches
B_FiBwManBranch := 2*(IR(ND_FiPipe, SDR_26) - S_FiBwBranchFromWall)/(N_FiManBranchLow - 1) = 1.7738 cm
L_FiManBranchLow :=
    for i ∈ 0 .. N_FiManBranchLow - 1
        L[i] ←
            IR(ND_FiPipe, SDR_26)*sin(acos((IR(ND_FiPipe, SDR_26) - S_FiBranchFromWall - B_FiManBranch*i + OR_Fitting(ND_FiManBranchLow))/IR(ND_FiPipe, SDR_26))) - OR(ND_FiManTrunkLow) - CapThickness(ND_FiManBranchLow) if i < N_FiManBranchLow/2
            IR(ND_FiPipe, SDR_26) - IR(ND_FiManTrunkLow, Sch40) - L_FiManCapOffset - CapThickness(ND_FiManBranchLow) if i + 0.5 == N_FiManBranchLow/2
            L[N_FiManBranchLow - 1 - i] otherwise
    L
L_FiBwManBranchLow :=
    for i ∈ 0 .. N_FiManBranchLow - 1
        L[i] ←
            IR(ND_FiPipe, SDR_26)*sin(acos((IR(ND_FiPipe, SDR_26) - S_FiBwBranchFromWall - B_FiBwManBranch*i + OR_Fitting(ND_FiBwManBranch))/IR(ND_FiPipe, SDR_26))) - OR(ND_FiBwTrunkLow) - CapThickness(ND_FiBwManBranch) if i < N_FiManBranchLow/2
            IR(ND_FiPipe, SDR_26) - IR(ND_FiBwTrunkLow, SDR_26) - L_FiBwManCapOffset - CapThickness(ND_FiBwManBranch) if i + 0.5 == N_FiManBranchLow/2
            L[N_FiManBranchLow - 1 - i] otherwise
    L
L_FiBwManBranchLow = [0.240104; 0.244009; 0.2468; 0.2468; 0.244009; 0.240104] m
L_FiManCouplingToFernco := SocketDepth(ND_FiManTrunkLow) + S_Fitting + FerncoCouplingLength(ND_FiManTrunkLow)/2 = 13.9815 cm
L_FiBwManCouplingToFernco := SocketDepth(ND_FiBwTrunkLow) + S_Fitting + FerncoCouplingLength(ND_FiBwTrunkLow)/2 = 14.6546 cm
L_FiManBranchActual := L_FiManBranchLow*2 + OD(1.5 in) - 2 cm = [0.540297; 0.549002; 0.554694; 0.554694; 0.549002; 0.540297] m
# The manifold branch lengths consider a branch to be the pipe coming out of the trunk on only one side of the manifold. Since we are going to pass the branches completely through the trunks, to get the length we actually need to cut we have to add the outer diameter of the manifold trunk. The 2cm subtracted is to account for the pipe caps on either end of the branches, and that was measured in the workshop.
L_FiBwManBranchActual := L_FiBwManBranchLow*2 + OD(3 in) - 2 cm = [0.549107; 0.556917; 0.5625; 0.5625; 0.556917; 0.549107] m
# Manifold Pipe Lengths (Perhaps just skip this part~)
# October 25 starts here.
HL_FiBwOrifice := PR_FiBwManTotal/Pi_FiManifoldHeadLoss = 8.80946 cm
A_FiBwOrifices := A_orifice(HL_FiBwOrifice, Pi_VCOrifice, Q_FiBw) = 37.0722 cm^2
L_FiManBranchLow = [0.256018; 0.260371; 0.263217; 0.263217; 0.260371; 0.256018] m
L_FiBwManBranchLow = [0.240104; 0.244009; 0.2468; 0.2468; 0.244009; 0.240104] m  # why would the slots area need to be twice the hole area?
A_FiManSlots := 2*A_FiBwOrifices = 74.1445 cm^2
# what is fitopmanslots
A_FiTopManSlots := A_FiBwOrifices
# Outlet Design
# Can B.FiManSlot be 1/16in? | CEO : can BFiManSlot be 1/16in?
B_FiManSlot := 1/16*in = 1.5875 mm
N_FiSlotRows := 2
# This 2 depends on how you define the lenght of the
W_FiManSlots = 0.0002032 m
L_FiOutletManSlotTotal := A_FiManSlots/W_FiManSlots = 36.4884 m
# is the distance where the slots are in the trunk important? (what percent of branch length is taken up by trunk? branch length ~50 cm, trunk low ND is 3.81
# Also the caps? if they take up a cm too thats up to nearly 6cm of space with no slots/covered unusable slots. That's ~10% error that seems like too much)
N_FiOutletManSlotsPerRow := floor(L_FiManBranchLow/B_FiManSlot) = [161; 164; 165; 165; 164; 161]
N_FiOutletManSlotsPerBranch := N_FiOutletManSlotsPerRow*N_FiSlotRows = [322; 328; 330; 330; 328; 322]
N_FiOutletSlotsTotal := 2*sum(N_FiOutletManSlotsPerBranch) = 3920
L_FiOutletManSlotCurvedInner := L_FiOutletManSlotTotal/N_FiOutletSlotsTotal = 0.366467 in
# Inlet Design
B_FiManOrificeEst := 1 cm
N_FiBwManBranchOrifices := floor((L_FiBwManBranchLow - B_FiManOrificeEst - 2*L_FiManBranchExt)/B_FiManOrificeEst) = [19; 19; 19; 19; 19; 19]
N_FiBwManBranchOrificesMax := 2*sum(N_FiBwManBranchOrifices) = 228
N_FiManBranchOrifices := floor((L_FiManBranchLow - B_FiManOrificeEst - 2*L_FiManBranchExt)/B_FiManOrificeEst) = [20; 21; 21; 21; 21; 20]
N_FiManBranchOrificesMax := 2*sum(N_FiManBranchOrifices) = 248
D_DrillFiOrifice := [1/8; 1/4]*in
D_FiBwManOrifice := CeilNearest(2*sqrt(A_FiBwOrifices/(π*N_FiBwManBranchOrificesMax)), D_DrillFiOrifice) = 0.25 in
D_FiInletManOrifice := CeilNearest(2*sqrt(A_FiManSlots/(π*N_FiManBranchOrificesMax)), D_DrillFiOrifice) = 0.25 in
D_FiTopManOrifice := CeilNearest(2*sqrt(A_FiTopManSlots/(π*N_FiManBranchOrificesMax)), D_DrillFiOrifice) = 0.25 in
N_FiBwManOrifices := min(N_FiBwManBranchOrificesMax, floor(A_FiBwOrifices/(π/4*D_FiBwManOrifice^2))) = 117
N_FiInletManOrifices := min(N_FiManBranchOrificesMax, floor(A_FiManSlots/(π/4*D_FiInletManOrifice^2))) = 234
N_FiTopManOrifices := min(N_FiManBranchOrificesMax, floor(A_FiTopManSlots/(π/4*D_FiTopManOrifice^2))) = 117
A_FiBwManOrifices := π/4*D_FiBwManOrifice^2*N_FiBwManOrifices = 37.053 cm^2
# not a priority but could ger done
A_FiInletManOrifices := π/4*D_FiInletManOrifice^2*N_FiInletManOrifices = 74.106 cm^2
A_FiTopManOrifices := π/4*D_FiTopManOrifice^2*N_FiTopManOrifices = 37.053 cm^2
HL_FiBwOrificeForward := (Q_FiLayer/(Pi_VCOrifice*A_FiBwOrifices))^2/(2*g) = 0.162274 cm  # E only belongs in 4th eqn, and not this saysd thatt
HL_FiInletManOrificeForward := (2*Q_FiLayer/(A_FiInletManOrifices*Pi_VCOrifice))^2/(2*g) = 0.162442 cm
HL_FiTopManOrificeForward := (Q_FiLayer/(A_FiTopManOrifices*Pi_VCOrifice))^2/(2*g) = 0.162442 cm
HL_FiOutletSlotForward := (2*Q_FiLayer/(A_FiManSlots*ε_FiSand*Pi_VCOrifice))^2/(2*g) = 1.01421 cm
HL_FiBwOrificeBw := (Q_FiBw/(Pi_VCOrifice*A_FiBwManOrifices))^2/(2*g) = 8.81861 cm
# Inlet Orifice and Outlet Slot Design
# Entrance and Exit Pipe dimensions
# Entrance Pipe
ND_FilterDistribution =  # error: This variable is undefined.
ND_FiManTrunkLow = 2 in
ND_FiBwTrunkLow = 3 in
# Entrance tank dimension is defined aftert it is solved for
A_InletsTotal := (π/4)*(OD_Fitting(ND_FilterDistribution)^2 + OD_Fitting(ND_FiBwTrunkLow)^2 + 3*OD_Fitting(ND_FiManTrunkLow)^2)
ND_EntranceTank := 10 in
ND_EntranceTankEstimate := ND(CeilNearest(D_circle(A_InletsTotal), AvailID(SDR_26)), SDR_26)
# This is the size of the micky mouse ears, but this is not correct becuae the tanks need: entrance overflow and exit drain, so both need an extra orifice
# Outlet Pipe
ND_OutletTank := ND_EntranceTank = 0.254 m
HL_FiExitMax := 5 cm
OD(10 in) = 0.27305 m
L_FiExitMax := 3 m
# 2 elbows? and the entrance? this seems odd because the other pipe bends aren't here. I suppose they are somewhere else?
K_FiExitMax := K_PipeEnt + 2*K_El90 = 2.3
ND_PlantExit := ND_PipeFlow(Q_Fi, SDR_26, HL_FiExitMax, L_FiExitMax, Nu_Water, E_Pvc, K_FiExitMax) = 3 in
ND_OutletDrain := 2 in
# Nov 6: This says the 2in drain is too small! therefore gotta be bigger!
# Plant Exit
# This is for the total plant not just the estars
ND_PlantExit = 3 in
L_Tuberia := 50 m
K_Total := 2*K_El90 + K_PipeEnt = 2.3  # "This is probably someone just playing around with numbers"
D_Tank := ID(2 in, SDR_41)
L_Tuberia2 := 2 m
K_Total2 := 2.*K_El90 + K_PipeExit + 2 = 4.8
HL_Total := h_l(Q_Plant, ND_PlantExit, L_Tuberia, K_Total, Nu_Water, E_Pvc) + h_l(Q_Plant, D_Tank, L_Tuberia2, K_Total2, Nu_Water, E_Pvc) = 2.20986 m
# November 4th
T_FiCapBottom := 1 in
# How are these all defined?
H_FiCapTop := 6 in
H_FiValve := 10 cm
H_FiBottom := 5 cm + T_FiCapBottom  # 5 cm inset from the ground
# so it's not directly on the ground
# why outer radius: because the layer thickness is defined middle to middle
H_FiSandLow := N_FiLayer*(H_FiLayerLow + OR(ND_FiManBranchLow)) + S_Fitting = 1.3502 m
H_FiSandActive := H_FiSandLow - OR(ND_FiManBranchLow) = 1.3335 m
Pi_FiFluidized = 1.3
H_FiFluidizedBed := Pi_FiFluidized*H_FiSandLow = 1.75526 m
H_FiFluidizedBedToSiphon = 0.2 m
# 20 cm from bed to siphon? why? safety! so no sand leaves the siphon. (11/5)
L_FiBodyPipe := H_FiBottom + H_FiFluidizedBed + H_FiFluidizedBedToSiphon + (OD_Fitting(ND_FiBwTrunkLow) + S_Fitting) = 2.18226 m
# what is this last term and what does it look like?Spacing from the bottoms.
S_Fitting = 0.05 m
# Sand bed head loss during steady state backwash. | from hl in fluidized bed?
HL_FiBwSS := H_FiSandLow*(Rho_FiSand - Rho_H2O)*(1 - ε_FiSand)/Rho_H2O = 1.3367 m
# The backwash head loss is almost exactly equal  to the sand bed depth. Note that this ignores losses in the plumbing.
# from force balance
HL_FiDirty = 0.6 m  # a set constraint? Yes from EI
HL_FiBwSF = 0.2 m
HL_FiTerminal := HL_FiCleanLayerMin + HL_FiDirty = 0.645294 m  # height where yo know you need to clean the filter
HL_FiBwInitiation := HL_FiBwSF + HL_FiBwSS = 1.5367 m  # to make sure there is enough head loss to backwash
# what do all these headlosses tell us?
ND_FiEntBoxDrain := 2 in
# How much does the filter bed over fluidize when the entrance box level lowers after backwash initiation?
# why is the useful? does it get accounted for?no where in this file and nowhere in drawing file remove soon. 11/19/18
H_FiFluidizedBedVariation := (HL_FiBwInitiation - HL_FiBwSS)*(A_Fi - 4*π*(OR(ND_FiManTrunkLow)^2 + OR(ND_FiEntBoxDrain)^2))/A_FiActive = 0.183615 m
# Total Sand Depth, Filter Pipe Length, Head Loss
HL_FiBwInitiation = 1.5367 m
# Plumbing Head Loss
HL_FiBwInletManifold := 1/3*h_f(Q_FiBw, ID(ND_FiBwTrunkLow, SDR_26), L_FiManTrunk, Nu_Water, E_Pvc) + h_e(Q_FiBw/(2*N_FiManBranchLow), ID(ND_FiBwBranchLow, Sch40), K_PipeEnt) + 2/3*h_f(Q_FiBw/(2*N_FiManBranchLow), ID(ND_FiBwBranchLow, Sch40), L_FiManBranchLow[0], Nu_Water, E_Pvc) + 1/3*h_f(Q_FiBw/(2*N_FiManBranchLow), ID(ND_FiBwBranchLow, Sch40), L_FiManBranchLow[2], Nu_Water, E_Pvc) + HL_FiBwOrificeForward
HL_FiFwdInletManifold(Q_Layer) := 1/3*h_f(2*Q_Layer, ID(ND_FiManTrunkLow, SDR_26), L_FiManTrunk, Nu_Water, E_Pvc) + h_e(Q_Layer/N_FiManBranchLow, ID(ND_FiManBranchLow, Sch40), K_PipeEnt) + 2/3*h_f(Q_Layer/N_FiManBranchLow, ID(ND_FiManBranchLow, Sch40), L_FiManBranchLow[0], Nu_Water, E_Pvc) + 1/3*h_f(Q_Layer/N_FiManBranchLow, ID(ND_FiManBranchLow, Sch40), L_FiManBranchLow[2], Nu_Water, E_Pvc) + HL_FiInletManOrificeForward
HL_FiFwdBotTopInletManifold(Q_Layer) := 1/3*h_f(Q_Layer, ID(ND_FiManTrunkLow, SDR_26), L_FiManTrunk, Nu_Water, E_Pvc) + h_e(Q_Layer/(2*N_FiManBranchLow), ID(ND_FiManBranchLow, Sch40), K_PipeEnt) + 2/3*h_f(Q_Layer/(2*N_FiManBranchLow), ID(ND_FiManBranchLow, Sch40), L_FiManBranchLow[0], Nu_Water, E_Pvc) + 1/3*h_f(Q_Layer/(2*N_FiManBranchLow), ID(ND_FiManBranchLow, Sch40), L_FiManBranchLow[2], Nu_Water, E_Pvc) + HL_FiTopManOrificeForward
HL_FiFwdOutletManifold(Q_Layer) := 1/3*h_f(2*Q_Layer, ID(ND_FiBwTrunkLow, SDR_26), L_FiManTrunk, Nu_Water, E_Pvc) + h_e(Q_Layer/N_FiManBranchLow, ID(ND_FiManBranchLow, Sch40), K_PipeExit) + 2/3*h_f(Q_Layer/N_FiManBranchLow, ID(ND_FiManBranchLow, Sch40), L_FiManBranchLow[0], Nu_Water, E_Pvc) + 1/3*h_f(Q_Layer/N_FiManBranchLow, ID(ND_FiManBranchLow, Sch40), L_FiManBranchLow[2], Nu_Water, E_Pvc) + HL_FiOutletSlotForward
L_LongestPath := 2*L_FiBodyPipe
# 11/4 How is this the longest path? Estimateioon 11/19
HL_FiInletPlumbing1(Q_Layer) := h_l(Q_Layer, ID(ND_FiManTrunkLow, SDR_26), L_LongestPath, K_PipeEnt + 4*K_El90, Nu_Water, E_Pvc) + HL_FiFwdBotTopInletManifold(Q_Layer)
# Do edits hopwever I want
# 11/4 Why are they numbered 1-4? There are more than that number of path? but only 4 inlets!
HL_FiInletPlumbing2(Q_Layer) := h_l(2*Q_Layer, ID(ND_FiManTrunkLow, SDR_26), L_LongestPath, K_PipeEnt + 5*K_El90, Nu_Water, E_Pvc) + HL_FiFwdInletManifold(Q_Layer)
# These are numbered from the top of the filter bed down. The top and bottom inlets have half the flow rate (only serve the layers below and above, respectively). The bottom inlet has the diameter of the backwash trunk.
HL_FiInletPlumbing3(Q_Layer) := h_l(2*Q_Layer, ID(ND_FiManTrunkLow, SDR_26), L_LongestPath, K_PipeEnt + 5*K_El90, Nu_Water, E_Pvc) + HL_FiFwdInletManifold(Q_Layer)
HL_FiInletPlumbing4(Q_Layer) := h_l(Q_Layer, ID(ND_FiManTrunkLow, SDR_26), L_LongestPath, K_PipeEnt + 5*K_El90, Nu_Water, E_Pvc) + HL_FiFwdBotTopInletManifold(Q_Layer)
HL_FiInletPlumbingMax(Q_1, Q_2, Q_3, Q_4) := max(HL_FiInletPlumbing1(Q_1), HL_FiInletPlumbing2(Q_2), HL_FiInletPlumbing3(Q_3), HL_FiInletPlumbing4(Q_4))
Q_1 = 0.000416667 m^3/s
HL_FiInletPlumbingMin(Q_1, Q_2, Q_3, Q_4) := min(HL_FiInletPlumbing1(Q_1), HL_FiInletPlumbing2(Q_2), HL_FiInletPlumbing3(Q_3), HL_FiInletPlumbing4(Q_4))
# 11/4 These seems like they are added multiple times?
OD(12 in) = 12.75 in  # are we intersted in max and min for any particular reason?
Q_2 = 0.000416667 m^3/s
HL_FiInletPlumbingAve(Q_1, Q_2, Q_3, Q_4) := (HL_FiInletPlumbing1(Q_1) + HL_FiInletPlumbing2(Q_2) + HL_FiInletPlumbing3(Q_3) + HL_FiInletPlumbing4(Q_4))/4
ID(12 in, SDR_41) = 12.09 in
ND(15 in) = ƒ(Unitless) → Length
Q_3 = 0.000416667 m^3/s
HL_FiBwInletPlumbing := h_l(Q_FiBw, ID(ND_FiBwTrunkLow, SDR_26), L_LongestPath, K_PipeEnt + 4*K_El90, Nu_Water, E_Pvc) + HL_FiBwInletManifold
Q_4 = 0.000416667 m^3/s
L_FiBodyPipe = 2.18226 m
HL_FiOutletPlumbing1(Q_Layer) := h_l(2*Q_Layer, ID(ND_FiManTrunkLow, SDR_26), L_LongestPath, K_PipeEnt + 5*K_El90 + K_TeeFlowBr, Nu_Water, E_Pvc) + HL_FiFwdOutletManifold(Q_Layer)
# these are for the three outlet pipes and include the total headloss approximately in each outlet system.
Q_5 = 0.000416667 m^3/s
HL_FiOutletPlumbing2(Q_Layer) := h_l(2*Q_Layer, ID(ND_FiManTrunkLow, SDR_26), L_LongestPath, K_PipeEnt + 5*K_El90 + K_TeeFlowBr, Nu_Water, E_Pvc) + HL_FiFwdOutletManifold(Q_Layer)
Q_6
HL_FiOutletPlumbing3(Q_Layer) := h_l(2*Q_Layer, ID(ND_FiManTrunkLow, SDR_26), L_LongestPath, K_PipeEnt + 5*K_El90 + K_TeeFlowBr, Nu_Water, E_Pvc) + HL_FiFwdOutletManifold(Q_Layer)
Q_6 = 0.000416667 m^3/s
HL_FiOutletPlumbingMax(Q_1, Q_3) := max(HL_FiOutletPlumbing1(Q_1), HL_FiOutletPlumbing2(Q_1), HL_FiOutletPlumbing3(Q_3))
HL_FiOutletPlumbingMin(Q_1, Q_3) := min(HL_FiOutletPlumbing1(Q_1), HL_FiOutletPlumbing2(Q_1), HL_FiOutletPlumbing3(Q_3))
# why q1 and q3? all the flows are the same?
# should have a 2 where did my comments go
HL_FiOutletPlumbingAve(Q_1, Q_3) := (HL_FiOutletPlumbing1(Q_1) + HL_FiOutletPlumbing2(Q_1) + HL_FiOutletPlumbing3(Q_3))/3
# Path Head Loss Calculations and Flow Distribution Between Layers
# the numbered flows make sense below here but not above here
HL_FiCleanLyr(Q) := h_lKozeny(H_FiLayerLow, D_FiSand60, Q/A_FiActive, ε_FiSand, Nu_Water)
HL_FiPathClean1(Q_Path) := HL_FiInletPlumbing1(Q_Path) + HL_FiCleanLyr(Q_Path) + HL_FiOutletPlumbing1(Q_Path)
# schematic made for the 6 trunk/inlet/outlet paths that ca n be taken q
HL_FiPathClean2(Q_Path) := HL_FiInletPlumbing2(Q_Path) + HL_FiCleanLyr(Q_Path) + HL_FiOutletPlumbing1(Q_Path)
HL_FiPathClean3(Q_Path) := HL_FiInletPlumbing2(Q_Path) + HL_FiCleanLyr(Q_Path) + HL_FiOutletPlumbing2(Q_Path)
HL_FiPathClean4(Q_Path) := HL_FiInletPlumbing3(Q_Path) + HL_FiCleanLyr(Q_Path) + HL_FiOutletPlumbing2(Q_Path)
HL_FiPathClean5(Q_Path) := HL_FiInletPlumbing3(Q_Path) + HL_FiCleanLyr(Q_Path) + HL_FiOutletPlumbing3(Q_Path)
HL_FiPathClean6(Q_Path) := HL_FiInletPlumbing4(Q_Path) + HL_FiCleanLyr(Q_Path) + HL_FiOutletPlumbing3(Q_Path)
HL_FiPathCleanMax(Q_1, Q_2, Q_3, Q_4, Q_5, Q_6) := max(HL_FiPathClean1(Q_1), HL_FiPathClean2(Q_2), HL_FiPathClean3(Q_3), HL_FiPathClean4(Q_4), HL_FiPathClean5(Q_5), HL_FiPathClean6(Q_6))
HL_FiPathCleanMin(Q_1, Q_2, Q_3, Q_4, Q_5, Q_6) := min(HL_FiPathClean1(Q_1), HL_FiPathClean2(Q_2), HL_FiPathClean3(Q_3), HL_FiPathClean4(Q_4), HL_FiPathClean5(Q_5), HL_FiPathClean6(Q_6))
# In reality the flow will distribute itself such that all paths have the same head loss. We will treat the average of all of the calculated path head losses as the actual complete head loss accross all paths.
HL_FiPathCleanAve(Q_1, Q_2, Q_3, Q_4, Q_5, Q_6) := (HL_FiPathClean1(Q_1) + HL_FiPathClean2(Q_2) + HL_FiPathClean3(Q_3) + HL_FiPathClean4(Q_4) + HL_FiPathClean5(Q_5) + HL_FiPathClean6(Q_6))/6
Pi_QFiLayer(Q_1, Q_2, Q_3, Q_4, Q_5, Q_6) := sqrt(HL_FiPathCleanMin(Q_1, Q_2, Q_3, Q_4, Q_5, Q_6)/HL_FiPathCleanMax(Q_1, Q_2, Q_3, Q_4, Q_5, Q_6))
# This estimate is reasonable as long as the answer is close to 1
# Guess:
Q_1 := Q_FiLayer
Q_2 := Q_FiLayer
Q_3 := Q_FiLayer
Q_4 := Q_FiLayer
Q_5 := Q_FiLayer
Q_6 := Q_FiLayer
Given
HL_FiPathClean1(Q_1) == HL_FiPathClean2(Q_2)
HL_FiPathClean2(Q_2) == HL_FiPathClean3(Q_3)
Q_1 + Q_2 + Q_3 + Q_4 + Q_5 + Q_6 == Q_Fi
HL_FiPathClean3(Q_3) == HL_FiPathClean4(Q_4)
HL_FiPathClean4(Q_4) == HL_FiPathClean5(Q_5)
HL_FiPathClean5(Q_5) == HL_FiPathClean6(Q_6)
HL_FiPath(Q) := Find(Q_1, Q_2, Q_3, Q_4, Q_5, Q_6)
Q_FiPath := HL_FiPath(Q_Fi) = [0.466008; 0.392911; 0.392911; 0.392911; 0.392911; 0.462346] L/s
HL_FiPathClean1(Q_FiPath[0]) = 14.8457 cm
Q_FiLayer1 := Q_FiPath[0]
HL_FiPathClean2(Q_FiPath[1]) = 14.8457 cm
Q_FiLayer2 := Q_FiPath[1]
HL_FiPathClean3(Q_FiPath[2]) = 14.8457 cm
Q_FiLayer3 := Q_FiPath[2]
HL_FiCleanPath := HL_FiPathClean1(Q_FiPath[0])
HL_FiPathClean4(Q_FiPath[3]) = 14.8457 cm
Q_FiLayer4 := Q_FiPath[3]
HL_FiPathClean5(Q_FiPath[4]) = 14.8457 cm
Q_FiLayer5 := Q_FiPath[4]
HL_FiPathClean6(Q_FiPath[5]) = 14.8457 cm
Q_FiLayer6 := Q_FiPath[5]
ND_Siphon := ND_FiBwTrunkLow = 3 in
L_FiSiphonEst := 2*L_FiBodyPipe  # Why 11/13 ?
H_FiForwardNoSuckAir = 0.1 m
K_FiSiphon := K_PipeEnt + 3*K_El90 + K_PipeExit = 4.2
HL_FiSiphonInitiationMax := HL_FiBwInitiation + H_FiForwardNoSuckAir + HL_FiDirty + HL_FiBwInletPlumbing + HL_FiSiphonMax - H_FiSiphonNoSuckAir = 2.59468 m
# Variables  changed 11/28/18  to make this definition more clear
HL_FiSiphonPipe := h_l(Q_FiBw, ID(ND_Siphon, SDR_26), L_FiSiphonEst, K_FiSiphon, Nu_Water, E_Pvc) = 0.0981892 m
HL_FiSiphonOutlet := Headloss_weir(Q_FiBw, ID(ND_Siphon, SDR_26)) = 0.0742763 m
HL_FiSiphonOrifice := h_orifice(ID(ND_Siphon, SDR_26), Pi_VCOrifice, Q_FiBw) = 0.0444132 m
HL_FiBwTotalSS := HL_FiBwInletPlumbing + HL_FiBwSS + HL_FiSiphonOrifice + HL_FiSiphonPipe + HL_FiSiphonOutlet = 1.66156 m
Rho_FiFluidized := Rho_H2O*ε_FiSand*Pi_FiFluidized + Rho_FiSand*(1 - ε_FiSand)/Pi_FiFluidized
# Siphon Design (get siphon schemtic bfore continuing
# Elevations and Filter Sizing
Z_FilterEntranceExit =  # error  # Height relative to Sed Tank Floor.
# This is not complete? not used?
Z_FilterTop := Z_FilterMax
# Z.FilterMax from Sed Tank File is the maximum height that water can leave coming out of the valve on top of the filter with the sed tank floor as a reference point
H_FiBodyWaterMax := L_FiBodyPipe + 1/2*H_FiCapTop + H_FiValve = 2.35846 m
Z_FilterConcreteDrop := Z_FilterTop - H_FiBodyWaterMax
H_FilterEntrancePipeSafety := 10 cm  # Height above freefall so that entrance tank does not overflow
# but this does happen?
# No over flow accoutned for here?
H_FilterEntranceTank := H_FilterEntrancePipeSafety + HL_FiTerminal + HL_FiCleanPath = 0.893751 m
Z_FilterEntranceTankTop := Z_FilterEntranceExit + H_FilterEntrancePipeSafety
Z_FilterEntranceTankBottom := Z_FilterEntranceTankTop - H_FilterEntranceTank
Z_FilterExitTankTop := Z_FilterEntranceTankTop
Z_FilterExitTankBottom := Z_FilterEntranceTankBottom
Z_FiExitBottom := Z_FilterExitTankBottom
ZW_FiEntBwSS := Z_FilterEntranceTankBottom + H_FiBwNoSuckAir
Z_SiphonOutlet := ZW_FiEntBwSS - HL_FiBwTotalSS
Z_FiBwPipe := Z_FilterTop - H_FiValve - 1/2*H_FiCapTop - S_Fitting
W_FilterFront := 50 cm + FerncoCouplingLength(ND_FiBwTrunkLow) + MaleAdapterLength(ND_FiBwTrunkLow) = 0.701104 m  # 50 cm for filter air traps
W_FilterBack := 2*S_Fitting + ElbowRadius(ND_Siphon) + FerncoCouplingLength(ND_Siphon) + S_Fitting + OD(ND_FiPipe) = 0.907523 m
W_Filter := W_FilterFront + W_FilterBack + OD(ND_FiPipe) = 2.21823 m
L_Filter := OD(ND_EntranceTank) + OD(ND_OutletTank) + OD(ND_FiPipe) = 1.1557 m  # Why is this a length?
A_FilterMin := L_Filter*W_Filter*N_Fi = 5.12721 m^2  # footprint area
# Backwash Flow Control
H_BackwashOrifice := H_FiBwNoSuckAir = 0.2 m
Z_BackwashOrifice := Z_FilterEntranceTankBottom + H_BackwashOrifice
HL_BackwashOrifice := Z_FilterEntranceExit - Z_BackwashOrifice
A_BackwashOrifice := A_orifice(HL_BackwashOrifice, Pi_VCOrifice, Q_FiBw)
N_BackwashOrificeEst := 7
D_BackwashOrifice := CeilNearest(2*sqrt(A_BackwashOrifice/(π*N_BackwashOrificeEst)), D_Drill)
C_BackwashInlet := ID(ND_FilterDistribution, SDR_41)*π
N_MaxOrifices := C_BackwashInlet/D_BackwashOrifice
A_BackWashOrificeActual := N_BackwashOrificeEst*D_BackwashOrifice^2*π/4
Q_BackwashActual := Pi_VCOrifice*A_BackWashOrificeActual*sqrt(2*g*HL_BackwashOrifice)
# Sand Volume
N_FiMod := 7
A_Fi = 0.279091 m^2
L_FiSlotted1inMod := sum(L_FiManBranchLow)*2 = 3.11842 m
H_FiSandLow = 1.3502 m
V_FiPlumbing := π/4*(OD(ND_FiBwTrunkLow)^2*ID(ND_FiPipe, SDR_26) + N_FiMod*OD(1 in)^2*L_FiSlotted1inMod) = 0.022827 m^3
V_SandTotal := (A_Fi*H_FiSandLow - V_FiPlumbing) = 0.354003 m^3
ρ_Sand := 88 gm/(50 mL)
M_Sand := V_SandTotal*ρ_Sand = 623.045 kg
M_SandBag := 50 lb = 22.6796 kg
N_SandBagEst := N_Fi*ceil(M_Sand/M_SandBag) = 56
N_SandBag := ceil(1.25*N_SandBagEst) = 70  # 25% safety factor
# Filter Stability
D_EntTubeToFilterBody := 1/2*OD(ND_EntranceTank) + 1/2*OD(ND_FiPipe) = 0.441325 m
# Center to center distance from entrance tube to
# filter body center of gravity
Vol_EntTube := (ID(ND_EntranceTank, SDR_41)^2*π/4*H_FilterEntranceTank) = 0.0470612 m^3
Vol_FilterBodyEmpty := (OD(ND_FiPipe)^2*π/4 - ID(ND_FiPipe, SDR_26)^2*π/4)*L_FiBodyPipe = 27.8721 L
Vol_FilterBodyFull := ID(ND_FiPipe, SDR_26)^2*π/4*L_FiBodyPipe = 609.051 L
Vol_EntTube0.25 := ID(ND_EntranceTank, SDR_41)^2*π/4*1/4*H_FilterEntranceTank
Rho_Pvc := 1.3*gm/cm^3 = 1300 kg/m^3
1/4*H_FilterEntranceTank = 0.223438 m
Mass_FilterBodyTube := Vol_FilterBodyEmpty*Rho_Pvc = 36.2337 kg
Mass_FilterComponents := 4 kg
Mass_FilterBodyEmpty := Mass_FilterBodyTube + Mass_FilterComponents = 40.2337 kg
Mass_FilterBodyFull := Vol_FilterBodyFull*Rho_H2O = 609.051 kg
Mass_EntTube := Vol_EntTube*Rho_H2O = 47.0612 kg
Mass_EntTube0.25 := Vol_EntTube0.25*Rho_H2O = 11.7653 kg
COM_FilterEmpty := ID(ND_FiPipe, SDR_41)/2 - 1/Mass_FilterBodyEmpty*Mass_EntTube*D_EntTubeToFilterBody = -22.7317 cm
# Be careful - the worst case scenario WILL cause the
# filter to tip over.  The most an empty filter can bear is 1/3 of the total entrance
# tank capacity
COM_FilterEmpty0.25 := ID(ND_FiPipe, SDR_41)/2 - 1/Mass_FilterBodyEmpty*Mass_EntTube0.25*D_EntTubeToFilterBody = 0.159845 m
# Max water capacity is about 22cm with an empty filter
COM_FilterFull := ID(ND_FiPipe, SDR_41)/2 - 1/Mass_FilterBodyFull*Mass_EntTube*D_EntTubeToFilterBody = 25.4799 cm
# Materials
L_TotalFiPipe := L_FiBodyPipe*N_Fi = 4.36453 m
L_FiManBranchLow = [0.256018; 0.260371; 0.263217; 0.263217; 0.260371; 0.256018] m
L_TotalBranchManifold := 1.5*(3*2*sum(L_FiManBranchLow)) = 14.0329 m
ID(ND_FiPipe, SDR_26) = 0.596113 m
# why 1.5?
N_Wings := N_Fi*2*N_FiManBranchLow*3.5 = 84
