Q_Plant := 3*L/s
C_CoagDoseMax := 40*mg/L
C_ChlorDoseAve := 1*mg/L
N_Fi := 2
# Plant design calculations:
# [reference: ExpertInputs.xmcd]
# [reference: MathFunctions.xmcd]
# [reference: PipeDatabase.xmcd]
# [reference: MaterialsDatabase.xmcd]
# [reference: FluidsFunctions.xmcd]
# [reference: LFOM10cmPF_References.xmcd]
# [reference: JuanRevisedSedimentationTankPF.xmcd]
# Enclosed Stacked Rapid Sand Filter
# Dimensions and pipe sizes
N_Fi = 2  # Always assume two filters
V_FiBw = 11 mm/s
H_FiLayerLow := 0.2 m
ND_FiPipeArray := [12; 18; 24; 30; 36]*in
ND_FiPipe := ND(CeilNearest(D_circle(Q_Fi/V_FiBw), AvailID(SDR_26)), SDR_26) = 18 in
ND_FiManTrunkMinLow := 1.5 in
N_FiManBranchLow := 6  # Number of branches on either side. Completely arbitrary, as far as I can tell.
N_FiInletPipesLow := 4
ND_BallValve := 3 in
ND_FiManBranchMinLow := 1 in
N_FiOutletPipesLow := 3
ND_BedTester := 1/2*in
ND_FiBwTrunkMinLow := 2 in
ND_BedTesterOuter := 1 in
ND_FiBwBranchMinLow := 1 in
ND_FiAirRelValve := 1/2*in
A_Fi := ID(ND_FiPipe, SDR_26)^2/4*π = 0.157654 m^2
# Layer thickness as function of trunk diameter
# round up to the nearest cm to make construction easier
H_FiLayerF(ND_Trunk) := max(H_FiLayerLow, Ceil(OR(ND_Trunk) + S_FiTrunkMin, 1 cm), Ceil(OD_Fitting(ND_Trunk), 1 cm), Ceil(FerncoOuterDiameter(ND_Trunk), 1 cm))
H_FiBottomLayerF(ND_Trunk, ND_BwTrunk) := max(H_FiLayerLow, Ceil(OR(ND_Trunk) + OR(ND_BwTrunk) + S_FiTrunkMin, 1 cm), Ceil(OR_Fitting(ND_Trunk) + OR_Fitting(ND_BwTrunk), 1 cm), Ceil(FerncoOuterDiameter(ND_Trunk)/2 + FerncoOuterDiameter(ND_BwTrunk)/2, 1 cm))
# Flow distribution constraints: ratio of pressure recovery to clean bed head loss
# There are three flow distribution problems in the filter design: distribution between the slots along a manifold branch, distribution between branches along a trunk, and distribution between filter layers. The first two are both addressed by making pressure recovery in the manifold (both trunks and branches) small relative to the short path head loss (head loss through the clean bed, since slot head loss in forward filtration is small). In backwash mode where there is no bed head loss, the pressure recovery in the manifold plumbing must be small relative to slot head loss.
#
# Head loss through the inlet and outlet plumbing differs for different layers both because the number of elbows varies and because the top and bottom inlets have 1/2 the flow of the middle two. Therefore good flow distribution between layers would be addressed by making head loss through the inlet and outlet plumbing small for all layers relative to clean bed head loss. We do not have an explicit constraint set for this, but the constraint on trunk diameter which gives good flow distribution within the manifolds seems to be sufficient to take care of it. As a check, see the analysis under the section "Path Head Loss Calculations and Flow Distribution Between Layers" below.
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Pi_FiManifoldQ := 0.85  # Ratio of long path flow to short path flow
Pi_FiManifoldHeadLoss := 1 - Pi_FiManifoldQ^2 = 0.2775
# Ratio of pressure recovery in the slotted pipes to the head loss through the clean bed (or through the slots in backwash mode)
# Even though the piezometric head profiles for the inlet and outlet manifolds on the middle layers may be parallel meaning that pressure recovery there need not be small for good distribution between sand bed flow paths, we still need pressure recovery to be small in the outlet manifolds in order to get good flow distribution in the top and bottom layers where the velocity in the manifolds is 1/2 and the pressure recovery 1/4 that of other layers (even smaller in the larger-diameter bottom manifold where velocity head is tiny).
# Filter Flow Rates and Layer Height
Q_FiMax := V_FiBw*A_Fi = 1.73419 L/s
N_Fi = 2
Q_Fi = 0.0015 m^3/s  # The flow will be divided evenly between the N_Fi = 2 filters.
A_FiActive := A_Fi = 0.157654 m^2
Q_FiLayer := Q_Fi/N_FiLayer = 0.25 L/s  # This is the flow rate through each filter layer
Q_FiBw := V_FiBw*A_Fi = 1.73419 L/s
H_FiLayer := H_FiLayerF(ND_FiManTrunkMinLow) = 20 cm
# Filter Trunk and Branch Diameters
Q_FiBwBranchMax := Q_FiBw/(2*N_FiManBranchLow) = 0.000144516 m^3/s
Q_FiBranchMax := 2*Q_FiLayer/(2*N_FiManBranchLow) = 4.16667e-5 m^3/s
A_FiBranchMin := ID(ND_FiManBranchMinLow, SDR_26)^2*π/4 = 0.000699573 m^2
A_FiBwBranchMin := ID(ND_FiBwBranchMinLow, SDR_26)^2*π/4
V_FiManBranchEst := Q_FiBranchMax/A_FiBranchMin = 0.0595601 m/s
V_FiBwManBranchEst := Q_FiBwBranchMax/A_FiBwBranchMin = 0.206578 m/s
PR_FiManBranchEst := V_FiManBranchEst^2/(2*g) = 0.0180868 cm
PR_FiBwManBranchEst := V_FiBwManBranchEst^2/(2*g) = 0.217579 cm
# First constraint: pressure recovery in trunks during forward filtration
HL_FiCleanLayerMin := h_lKozeny(H_FiLayer, D_FiSand60, Q_FiLayer/A_Fi, ε_FiSand, Nu_Water) = 4.81095 cm
PR_FiManMax := HL_FiCleanLayerMin*Pi_FiManifoldHeadLoss
V_FiManTrunkMaxPR := sqrt(2*g*(PR_FiManMax - PR_FiManBranchEst)) = 0.50823 m/s
ND_FiManTrunkLow := max(ND_FiManTrunkMinLow, ND(CeilNearest(D_circle(2*Q_FiLayer/V_FiManTrunkMaxPR), AvailID(SDR_26)), SDR_26)) = 1.5 in
PR_FiTrunk := (2*Q_FiLayer/(ND_FiManTrunkLow^2*π/4))^2/(2*g)
PR_FiManBranchMax := PR_FiManMax - PR_FiTrunk = 0.003544 m
V_FiManBranchMax := sqrt(2*g*PR_FiManBranchMax) = 0.263646 m/s
ND_FiManBranchLow := max(ND_FiManBranchMinLow, ND(CeilNearest(D_circle(2*Q_FiLayer/(2*N_FiManBranchLow)/V_FiManBranchMax), AvailID(SDR_26)), SDR_26)) = 1 in
PR_FiManBranch := (2*Q_FiLayer/(2*N_FiManBranchLow)/(ID(ND_FiManBranchLow, SDR_26)^2*π/4))^2/(2*g) = 0.000180868 m
PR_FiManTotal := PR_FiTrunk + PR_FiManBranch = 0.998727 cm
PR_FiManMax = 1.33504 cm
# Second constraint: pressure recovery in lowest trunk during backwash
HL_FiBwSlotsEst := 10 cm
PR_FiBwManMax := HL_FiBwSlotsEst*Pi_FiManifoldHeadLoss = 2.775 cm
V_FiBwManTrunkMaxPR := sqrt(2*g*(PR_FiBwManMax - PR_FiBwManBranchEst)) = 0.708234 m/s
ND_FiBwTrunkLow := max(ND_FiBwTrunkMinLow, ND(CeilNearest(D_circle(Q_FiBw/V_FiBwManTrunkMaxPR), AvailID(SDR_26)), SDR_26)) = 3 in
PR_FiBwTrunk := (Q_FiBw/(ID(ND_FiBwTrunkLow, SDR_26)^2*π/4))^2/(2*g) = 0.562484 cm
PR_FiBwManBranchMax := PR_FiBwManMax - PR_FiBwTrunk = 2.21252 cm
V_FiBwManBranchMax := sqrt(2*g*PR_FiBwManBranchMax) = 0.658747 m/s
ND_FiBwBranchLow := max(ND_FiBwBranchMinLow, ND(CeilNearest(D_circle(Q_FiBw/(2*N_FiManBranchLow)/V_FiBwManBranchMax), AvailID(SDR_26)), SDR_26)) = 1 in
PR_FiBwManBranch := (Q_FiBw/(2*N_FiManBranchLow)/(ID(ND_FiBwBranchLow, SDR_26)^2*π/4))^2/(2*g) = 0.217579 cm
PR_FiBwManTotal := PR_FiBwTrunk + PR_FiBwManBranch = 0.780063 cm
PR_FiBwManMax = 2.775 cm
# Manifold Pipe Lengths
L_TeeThickness := 8.5 cm
L_PipeStubInside := 1.6 cm
L_FiManTrunk := 44.5 cm - L_PipeStubInside - CapThickness(ND_FiManTrunkLow) - 1.25 cm = 41.2055 cm
# Minus extra length to account for the pipe caps. These values (1.25cm, 3cm) were measured in the workshop.
L_FiBwManTrunk := 44.5 cm - L_PipeStubInside - CapThickness(ND_FiBwTrunkLow) - 3 cm = 39.265 cm
L_FiManCapOffset := IR(ND_FiPipe, SDR_26) - OR_Fitting(ND_FiManBranchLow)/tan(asin(OD_Fitting(ND_FiManBranchLow)/ID(ND_FiPipe, SDR_26))) = 0.0880632 cm
L_FiBwManCapOffset := IR(ND_FiPipe, SDR_26) - OR_Fitting(ND_FiBwBranchLow)/tan(asin(OD_Fitting(ND_FiBwBranchLow)/ID(ND_FiPipe, SDR_26))) = 0.0880632 cm
S_FiBranchFromWall := max(SocketDepth(ND_FiManTrunkLow), ID(ND_FiPipe, SDR_26) - L_FiManTrunk + SocketDepth(ND_FiManTrunkLow)) + OR(ND_FiManBranchLow) = 0.0846761 m
S_FiBwBranchFromWall := max(SocketDepth(ND_FiBwTrunkLow), ID(ND_FiPipe, SDR_26) - L_FiManTrunk + SocketDepth(ND_FiBwTrunkLow)) + OR(ND_FiBwManBranch) = 0.106106 m
B_FiManBranch := 2*(IR(ND_FiPipe, SDR_26) - S_FiBranchFromWall)/(N_FiManBranchLow - 1) = 5.57357 cm
# Spacing between branches
B_FiBwManBranch := 2*(IR(ND_FiPipe, SDR_26) - S_FiBwBranchFromWall)/(N_FiManBranchLow - 1) = 4.71639 cm
L_FiManBranchLow :=
    for i ∈ 0 .. N_FiManBranchLow - 1
        L[i] ←
            IR(ND_FiPipe, SDR_26)*sin(acos((IR(ND_FiPipe, SDR_26) - S_FiBranchFromWall - B_FiManBranch*i + OR_Fitting(ND_FiManBranchLow))/IR(ND_FiPipe, SDR_26))) - OR(ND_FiManTrunkLow) - CapThickness(ND_FiManBranchLow) if i < N_FiManBranchLow/2
            IR(ND_FiPipe, SDR_26) - IR(ND_FiManTrunkLow, Sch40) - L_FiManCapOffset - CapThickness(ND_FiManBranchLow) if i + 0.5 == N_FiManBranchLow/2
            L[N_FiManBranchLow - 1 - i] otherwise
    L
L_FiBwManBranchLow :=
    for i ∈ 0 .. N_FiManBranchLow - 1
        L[i] ←
            IR(ND_FiPipe, SDR_26)*sin(acos((IR(ND_FiPipe, SDR_26) - S_FiBwBranchFromWall - B_FiBwManBranch*i + OR_Fitting(ND_FiBwManBranch))/IR(ND_FiPipe, SDR_26))) - OR(ND_FiBwTrunkLow) - CapThickness(ND_FiBwManBranch) if i < N_FiManBranchLow/2
            IR(ND_FiPipe, SDR_26) - IR(ND_FiBwTrunkLow, SDR_26) - L_FiBwManCapOffset - CapThickness(ND_FiBwManBranch) if i + 0.5 == N_FiManBranchLow/2
            L[N_FiManBranchLow - 1 - i] otherwise
    L
L_FiManCouplingToFernco := SocketDepth(ND_FiManTrunkLow) + S_Fitting + FerncoCouplingLength(ND_FiManTrunkLow)/2 = 12.5561 cm
L_FiBwManCouplingToFernco := SocketDepth(ND_FiBwTrunkLow) + S_Fitting + FerncoCouplingLength(ND_FiBwTrunkLow)/2 = 14.6546 cm
L_FiManBranchActual := L_FiManBranchLow*2 + OD(1.5 in) - 2 cm = [0.288951; 0.371113; 0.411464; 0.411464; 0.371113; 0.288951] m
# The manifold branch lengths consider a branch to be the pipe coming out of the trunk on only one side of the manifold. Since we are going to pass the branches completely through the trunks, to get the length we actually need to cut we have to add the outer diameter of the manifold trunk. The 2cm subtracted is to account for the pipe caps on either end of the branches, and that was measured in the workshop.
L_FiBwManBranchActual := L_FiBwManBranchLow*2 + OD(3 in) - 2 cm = [0.31008; 0.372698; 0.406828; 0.406828; 0.372698; 0.31008] m
# Inlet Orifice and Outlet Slot Design
HL_FiBwOrifice := PR_FiBwManTotal/Pi_FiManifoldHeadLoss = 2.81104 cm
A_FiBwOrifices := A_orifice(HL_FiBwOrifice, Pi_VCOrifice, Q_FiBw) = 37.0722 cm^2
A_FiManSlots := 2*A_FiBwOrifices = 74.1445 cm^2
A_FiTopManSlots := A_FiBwOrifices
# Outlet Design
# Can B.FiManSlot be 1/16in?
B_FiManSlot := 3/32*in = 2.38125 mm
N_FiSlotRows := 2
L_FiOutletManSlotTotal := A_FiManSlots/W_FiManSlots = 36.4884 m
N_FiOutletManSlotsPerRow := floor(L_FiManBranchLow/B_FiManSlot) = [54; 71; 80; 80; 71; 54]
N_FiOutletManSlotsPerBranch := N_FiOutletManSlotsPerRow*N_FiSlotRows = [108; 142; 160; 160; 142; 108]
N_FiOutletSlotsTotal := 2*sum(N_FiOutletManSlotsPerBranch) = 1640
L_FiOutletManSlotCurvedInner := L_FiOutletManSlotTotal/N_FiOutletSlotsTotal = 0.875946 in
# Inlet Design
B_FiManOrificeEst := 1 cm
L_FiManBranchExt = 2 cm
N_FiBwManBranchOrifices := floor((L_FiBwManBranchLow - B_FiManOrificeEst - 2*L_FiManBranchExt)/B_FiManOrificeEst) = [7; 10; 11; 11; 10; 7]
N_FiBwManBranchOrificesMax := 2*sum(N_FiBwManBranchOrifices) = 112
N_FiManBranchOrifices := floor((L_FiManBranchLow - B_FiManOrificeEst - 2*L_FiManBranchExt)/B_FiManOrificeEst) = [8; 12; 14; 14; 12; 8]
N_FiManBranchOrificesMax := 2*sum(N_FiManBranchOrifices) = 136
D_DrillFiOrifice := [1/4; 3/8]*in
D_FiBwManOrifice := CeilNearest(2*sqrt(A_FiBwOrifices/(π*N_FiBwManBranchOrificesMax)), D_DrillFiOrifice) = 0.375 in
D_FiInletManOrifice := CeilNearest(2*sqrt(A_FiManSlots/(π*N_FiManBranchOrificesMax)), D_DrillFiOrifice) = 0.375 in
D_FiTopManOrifice := CeilNearest(2*sqrt(A_FiTopManSlots/(π*N_FiBwManBranchOrificesMax)), D_DrillFiOrifice) = 0.375 in
# Set N orifices to N.Bw orifices so that orifice area is equal between the backwash pipe and the top inlet.
N_FiBwManOrifices := min(N_FiBwManBranchOrificesMax, floor(A_FiBwOrifices/(π/4*D_FiBwManOrifice^2))) = 52
# Number of orifices per branch, or per one side of the manifold trunk. So the shortest branch of the top inlet manifold will have 5 orifices on branch on the left side of the trunk and 5 orifices on the branch on the right side of the trunk.
N_FiInletOrificesPerBranch := [5; 10; 11; 11; 10; 5]
N_FiInletManOrifices := min(N_FiManBranchOrificesMax, floor(A_FiManSlots/(π/4*D_FiInletManOrifice^2))) = 104
N_FiTopManOrifices := min(N_FiManBranchOrificesMax, floor(A_FiTopManSlots/(π/4*D_FiTopManOrifice^2))) = 52
# These numbers were chosen based on the arrays for the max number of orifices per branch and are a bit arbitrary in that sense. Should figure out a way to calculate these without hardcoding.
N_FiTopInletOrificesPerBranch := [3; 4; 6; 6; 4; 3]
A_FiBwManOrifices := π/4*D_FiBwManOrifice^2*N_FiBwManOrifices = 37.053 cm^2
A_FiInletManOrifices := π/4*D_FiInletManOrifice^2*N_FiInletManOrifices = 74.106 cm^2
A_FiTopManOrifices := π/4*D_FiTopManOrifice^2*N_FiTopManOrifices = 37.053 cm^2
N_FiBwOrificesPerBranch := [3; 4; 6; 6; 4; 3]
HL_FiBwOrificeForward := (Q_FiLayer/(Pi_VCOrifice*A_FiBwOrifices*ε_FiSand))^2/(2*g) = 0.365116 cm
HL_FiInletManOrificeForward := (2*Q_FiLayer/(A_FiInletManOrifices*Pi_VCOrifice*ε_FiSand))^2/(2*g) = 0.365495 cm
HL_FiTopManOrificeForward := (Q_FiLayer/(A_FiTopManOrifices*Pi_VCOrifice*ε_FiSand))^2/(2*g) = 0.365495 cm
HL_FiOutletSlotForward := (2*Q_FiLayer/(A_FiManSlots*ε_FiSand*Pi_VCOrifice))^2/(2*g) = 0.365116 cm
HL_FiBwOrificeBw := (Q_FiBw/(Pi_VCOrifice*A_FiBwManOrifices))^2/(2*g) = 2.81396 cm
# Entrance and Exit Pipe dimensions
# Entrance Pipe
ND_FilterDistribution = 2 in
ND_FiManTrunkLow = 1.5 in
ND_FiBwTrunkLow = 3 in
A_InletsTotal := (π/4)*(OD_Fitting(ND_FilterDistribution)^2 + OD_Fitting(ND_FiBwTrunkLow)^2 + 3*OD_Fitting(ND_FiManTrunkLow)^2)
ND_EntranceTank := 10 in
ND_EntranceTankEstimate := ND(CeilNearest(D_circle(A_InletsTotal), AvailID(SDR_26)), SDR_26) = 8 in
# Outlet Pipe
ND_OutletTank := ND_EntranceTank = 10 in
HL_FiExitMax := 5 cm
L_FiExitMax := 3 m
K_FiExitMax := K_PipeEnt + 2*K_El90 = 2.3
ND_PlantExit := ND_PipeFlow(Q_Fi, SDR_26, HL_FiExitMax, L_FiExitMax, Nu_Water, E_Pvc, K_FiExitMax) = 3 in
ND_OutletDrain := 2 in
# Plant Exit
ND_PlantExit = 3 in
HL_Disponible := 1 m
L_Tuberia := 36 m
L_TuberiaActual := 36 m
K_Total := 4*K_El90 + K_PipeEnt = 4.1
Q_PlantActual := 3*L/s
K_TotalActual := 6.*K_El90 + K_PipeExit
D_Tank := ID(2 in, SDR_41) = 5.73823 cm
ND_Pipe := ND_PipeFlow(Q_PlantActual, SDR_26, HL_Disponible, L_TuberiaActual, Nu_Water, E_Pvc, K_TotalActual) = 3 in
L_Tuberia2 := 3 m
K_Total2 := 2.*K_El90 + K_PipeExit + 2 = 4.8
HL_Total := h_l(Q_Plant, ND_PlantExit, L_Tuberia, K_Total, Nu_Water, E_Pvc) + h_l(Q_Plant, D_Tank, L_Tuberia2, K_Total2, Nu_Water, E_Pvc) = 0.782384 m
# Total Sand Depth, Filter Pipe Length, Head Loss
T_FiCapBottom := 1/2*in
H_FiCapTop := 6 in
H_FiValve := 10 cm
H_FiBottom := 5 cm + T_FiCapBottom  # Does this mean the cap is up 5cm from the bottom of the filter? Why would you do that?
H_FiSandLow := N_FiLayer*H_FiLayerLow + OR(ND_FiManBranchLow) = 1.2167 m
H_FiSandActive := H_FiSandLow - OR(ND_FiManBranchLow) = 1.2 m
H_FiFluidizedBed := Pi_FiFluidized*H_FiSandLow = 1.58171 m
L_FiBodyPipe := H_FiBottom + H_FiFluidizedBed + H_FiFluidizedBedToSiphon + (OD_Fitting(ND_FiBwTrunkLow) + S_Fitting) = 1.99601 m  # FILTER COLUMN LENGTH
# Sand bed head loss during steady state backwash.
HL_FiBwSS := H_FiSandLow*(Rho_FiSand - Rho_H2O)*(1 - ε_FiSand)/Rho_H2O = 1.20453 m
# The backwash head loss is almost exactly equal  to the sand bed depth. Note that this ignores losses in the plumbing.
HL_FiDirty = 0.6 m
HL_FiTerminal := HL_FiCleanLayerMin + HL_FiDirty = 0.64811 m
HL_FiBwInitiation := HL_FiBwSF + HL_FiBwSS = 1.40453 m
ND_FiEntBoxDrain := 2 in
# How much does the filter bed over fluidize when the entrance box level lowers after backwash initiation?
H_FiFluidizedBedVariation := (HL_FiBwInitiation - HL_FiBwSS)*(A_Fi - 4*π*(OR(ND_FiManTrunkLow)^2 + OR(ND_FiEntBoxDrain)^2))/A_FiActive = 0.176214 m
# Plumbing Head Loss
HL_FiBwInletManifold := 1/3*h_f(Q_FiBw, ID(ND_FiBwTrunkLow, SDR_26), L_FiManTrunk, Nu_Water, E_Pvc) + h_e(Q_FiBw/(2*N_FiManBranchLow), ID(ND_FiBwBranchLow, Sch40), K_PipeEnt) + 2/3*h_f(Q_FiBw/(2*N_FiManBranchLow), ID(ND_FiBwBranchLow, Sch40), L_FiManBranchLow[0], Nu_Water, E_Pvc) + 1/3*h_f(Q_FiBw/(2*N_FiManBranchLow), ID(ND_FiBwBranchLow, Sch40), L_FiManBranchLow[2], Nu_Water, E_Pvc) + HL_FiBwOrificeForward
HL_FiFwdInletManifold(Q_Layer) := 1/3*h_f(2*Q_Layer, ID(ND_FiManTrunkLow, SDR_26), L_FiManTrunk, Nu_Water, E_Pvc) + h_e(Q_Layer/N_FiManBranchLow, ID(ND_FiManBranchLow, Sch40), K_PipeEnt) + 2/3*h_f(Q_Layer/N_FiManBranchLow, ID(ND_FiManBranchLow, Sch40), L_FiManBranchLow[0], Nu_Water, E_Pvc) + 1/3*h_f(Q_Layer/N_FiManBranchLow, ID(ND_FiManBranchLow, Sch40), L_FiManBranchLow[2], Nu_Water, E_Pvc) + HL_FiInletManOrificeForward
HL_FiFwdBotTopInletManifold(Q_Layer) := 1/3*h_f(Q_Layer, ID(ND_FiManTrunkLow, SDR_26), L_FiManTrunk, Nu_Water, E_Pvc) + h_e(Q_Layer/(2*N_FiManBranchLow), ID(ND_FiManBranchLow, Sch40), K_PipeEnt) + 2/3*h_f(Q_Layer/(2*N_FiManBranchLow), ID(ND_FiManBranchLow, Sch40), L_FiManBranchLow[0], Nu_Water, E_Pvc) + 1/3*h_f(Q_Layer/(2*N_FiManBranchLow), ID(ND_FiManBranchLow, Sch40), L_FiManBranchLow[2], Nu_Water, E_Pvc) + HL_FiTopManOrificeForward
HL_FiFwdOutletManifold(Q_Layer) := 1/3*h_f(2*Q_Layer, ID(ND_FiBwTrunkLow, SDR_26), L_FiManTrunk, Nu_Water, E_Pvc) + h_e(Q_Layer/N_FiManBranchLow, ID(ND_FiManBranchLow, Sch40), K_PipeExit) + 2/3*h_f(Q_Layer/N_FiManBranchLow, ID(ND_FiManBranchLow, Sch40), L_FiManBranchLow[0], Nu_Water, E_Pvc) + 1/3*h_f(Q_Layer/N_FiManBranchLow, ID(ND_FiManBranchLow, Sch40), L_FiManBranchLow[2], Nu_Water, E_Pvc) + HL_FiOutletSlotForward
L_LongestPath := 2*L_FiBodyPipe
HL_FiInletPlumbing1(Q_Layer) := h_l(Q_Layer, ID(ND_FiManTrunkLow, SDR_26), L_LongestPath, K_PipeEnt + 4*K_El90, Nu_Water, E_Pvc) + HL_FiFwdBotTopInletManifold(Q_Layer)
HL_FiInletPlumbing2(Q_Layer) := h_l(2*Q_Layer, ID(ND_FiManTrunkLow, SDR_26), L_LongestPath, K_PipeEnt + 5*K_El90, Nu_Water, E_Pvc) + HL_FiFwdInletManifold(Q_Layer)
# These are numbered from the top of the filter bed down. The top and bottom inlets have half the flow rate (only serve the layers below and above, respectively). The bottom inlet has the diameter of the backwash trunk.
HL_FiInletPlumbing3(Q_Layer) := h_l(2*Q_Layer, ID(ND_FiManTrunkLow, SDR_26), L_LongestPath, K_PipeEnt + 5*K_El90, Nu_Water, E_Pvc) + HL_FiFwdInletManifold(Q_Layer)
HL_FiInletPlumbing4(Q_Layer) := h_l(Q_Layer, ID(ND_FiManTrunkLow, SDR_26), L_LongestPath, K_PipeEnt + 5*K_El90, Nu_Water, E_Pvc) + HL_FiFwdBotTopInletManifold(Q_Layer)
HL_FiInletPlumbingMax(Q_1, Q_2, Q_3, Q_4) := max(HL_FiInletPlumbing1(Q_1), HL_FiInletPlumbing2(Q_2), HL_FiInletPlumbing3(Q_3), HL_FiInletPlumbing4(Q_4))
HL_FiInletPlumbingMin(Q_1, Q_2, Q_3, Q_4) := min(HL_FiInletPlumbing1(Q_1), HL_FiInletPlumbing2(Q_2), HL_FiInletPlumbing3(Q_3), HL_FiInletPlumbing4(Q_4))
HL_FiInletPlumbingAve(Q_1, Q_2, Q_3, Q_4) := (HL_FiInletPlumbing1(Q_1) + HL_FiInletPlumbing2(Q_2) + HL_FiInletPlumbing3(Q_3) + HL_FiInletPlumbing4(Q_4))/4
HL_FiBwInletPlumbing := h_l(Q_FiBw, ID(ND_FiBwTrunkLow, SDR_26), L_LongestPath, K_PipeEnt + 4*K_El90, Nu_Water, E_Pvc) + HL_FiBwInletManifold
HL_FiOutletPlumbing1(Q_Layer) := h_l(2*Q_Layer, ID(ND_FiManTrunkLow, SDR_26), L_LongestPath, K_PipeEnt + 5*K_El90 + K_TeeFlowBr, Nu_Water, E_Pvc) + HL_FiFwdOutletManifold(Q_Layer)
HL_FiOutletPlumbing2(Q_Layer) := h_l(2*Q_Layer, ID(ND_FiManTrunkLow, SDR_26), L_LongestPath, K_PipeEnt + 5*K_El90 + K_TeeFlowBr, Nu_Water, E_Pvc) + HL_FiFwdOutletManifold(Q_Layer)
HL_FiOutletPlumbing3(Q_Layer) := h_l(2*Q_Layer, ID(ND_FiManTrunkLow, SDR_26), L_LongestPath, K_PipeEnt + 5*K_El90 + K_TeeFlowBr, Nu_Water, E_Pvc) + HL_FiFwdOutletManifold(Q_Layer)
HL_FiOutletPlumbingMax(Q_1, Q_3) := max(HL_FiOutletPlumbing1(Q_1), HL_FiOutletPlumbing2(Q_1), HL_FiOutletPlumbing3(Q_3))
HL_FiOutletPlumbingMin(Q_1, Q_3) := min(HL_FiOutletPlumbing1(Q_1), HL_FiOutletPlumbing2(Q_1), HL_FiOutletPlumbing3(Q_3))
HL_FiOutletPlumbingAve(Q_1, Q_3) := (HL_FiOutletPlumbing1(Q_1) + HL_FiOutletPlumbing2(Q_1) + HL_FiOutletPlumbing3(Q_3))/3
# Path Head Loss Calculations and Flow Distribution Between Layers
HL_FiCleanLyr(Q) := h_lKozeny(H_FiLayerLow, D_FiSand60, Q/A_FiActive, ε_FiSand, Nu_Water)
HL_FiPathClean1(Q_Path) := HL_FiInletPlumbing1(Q_Path) + HL_FiCleanLyr(Q_Path) + HL_FiOutletPlumbing1(Q_Path)
HL_FiPathClean2(Q_Path) := HL_FiInletPlumbing2(Q_Path) + HL_FiCleanLyr(Q_Path) + HL_FiOutletPlumbing1(Q_Path)
HL_FiPathClean3(Q_Path) := HL_FiInletPlumbing2(Q_Path) + HL_FiCleanLyr(Q_Path) + HL_FiOutletPlumbing2(Q_Path)
HL_FiPathClean4(Q_Path) := HL_FiInletPlumbing3(Q_Path) + HL_FiCleanLyr(Q_Path) + HL_FiOutletPlumbing2(Q_Path)
HL_FiPathClean5(Q_Path) := HL_FiInletPlumbing3(Q_Path) + HL_FiCleanLyr(Q_Path) + HL_FiOutletPlumbing3(Q_Path)
HL_FiPathClean6(Q_Path) := HL_FiInletPlumbing4(Q_Path) + HL_FiCleanLyr(Q_Path) + HL_FiOutletPlumbing3(Q_Path)
HL_FiPathCleanMax(Q_1, Q_2, Q_3, Q_4, Q_5, Q_6) := max(HL_FiPathClean1(Q_1), HL_FiPathClean2(Q_2), HL_FiPathClean3(Q_3), HL_FiPathClean4(Q_4), HL_FiPathClean5(Q_5), HL_FiPathClean6(Q_6))
HL_FiPathCleanMin(Q_1, Q_2, Q_3, Q_4, Q_5, Q_6) := min(HL_FiPathClean1(Q_1), HL_FiPathClean2(Q_2), HL_FiPathClean3(Q_3), HL_FiPathClean4(Q_4), HL_FiPathClean5(Q_5), HL_FiPathClean6(Q_6))
# In reality the flow will distribute itself such that all paths have the same head loss. We will treat the average of all of the calculated path head losses as the actual complete head loss accross all paths.
HL_FiPathCleanAve(Q_1, Q_2, Q_3, Q_4, Q_5, Q_6) := (HL_FiPathClean1(Q_1) + HL_FiPathClean2(Q_2) + HL_FiPathClean3(Q_3) + HL_FiPathClean4(Q_4) + HL_FiPathClean5(Q_5) + HL_FiPathClean6(Q_6))/6
Pi_QFiLayer(Q_1, Q_2, Q_3, Q_4, Q_5, Q_6) := sqrt(HL_FiPathCleanMin(Q_1, Q_2, Q_3, Q_4, Q_5, Q_6)/HL_FiPathCleanMax(Q_1, Q_2, Q_3, Q_4, Q_5, Q_6))
# This estimate is reasonable as long as the answer is close to 1
# Guess:
Q_1 := Q_FiLayer
Q_2 := Q_FiLayer
Q_3 := Q_FiLayer
Q_4 := Q_FiLayer
Q_5 := Q_FiLayer
Q_6 := Q_FiLayer
Given
HL_FiPathClean1(Q_1) == HL_FiPathClean2(Q_2)
HL_FiPathClean2(Q_2) == HL_FiPathClean3(Q_3)
Q_1 + Q_2 + Q_3 + Q_4 + Q_5 + Q_6 == Q_Fi
HL_FiPathClean3(Q_3) == HL_FiPathClean4(Q_4)
HL_FiPathClean4(Q_4) == HL_FiPathClean5(Q_5)
HL_FiPathClean5(Q_5) == HL_FiPathClean6(Q_6)
HL_FiPath(Q) := Find(Q_1, Q_2, Q_3, Q_4, Q_5, Q_6)
Q_FiPath := HL_FiPath(Q_Fi) = [0.278968; 0.236023; 0.236023; 0.236023; 0.236023; 0.276942] L/s
HL_FiPathClean1(Q_FiPath[0]) = 14.1072 cm
Q_FiLayer1 := Q_FiPath[0]
HL_FiPathClean2(Q_FiPath[1]) = 14.1072 cm
Q_FiLayer2 := Q_FiPath[1]
HL_FiPathClean3(Q_FiPath[2]) = 14.1072 cm
Q_FiLayer3 := Q_FiPath[2]
HL_FiCleanPath := HL_FiPathClean1(Q_FiPath[0])
HL_FiPathClean4(Q_FiPath[3]) = 14.1072 cm
Q_FiLayer4 := Q_FiPath[3]
HL_FiPathClean5(Q_FiPath[4]) = 14.1072 cm
Q_FiLayer5 := Q_FiPath[4]
HL_FiPathClean6(Q_FiPath[5]) = 14.1072 cm
Q_FiLayer6 := Q_FiPath[5]
# Siphon Design
ND_Siphon := ND_FiBwTrunkLow = 3 in
HL_FiSiphonMax = 0.35 m
L_FiSiphonEst := 2*L_FiBodyPipe
K_FiSiphon := K_PipeEnt + 3*K_El90 + K_PipeExit
HL_FiSiphonInitiationMax := HL_FiBwSF + H_FiForwardNoSuckAir + HL_FiDirty + HL_FiBwInletPlumbing + HL_FiBwSS + HL_FiSiphonMax - H_FiSiphonNoSuckAir = 2.39162 m
HL_FiSiphonPipe := h_l(Q_FiBw, ID(ND_Siphon, SDR_26), L_FiSiphonEst, K_FiSiphon, Nu_Water, E_Pvc) = 0.0312431 m
HL_FiSiphonOutlet := Headloss_weir(Q_FiBw, ID(ND_Siphon, SDR_26)) = 0.0507563 m
HL_FiSiphonOrifice := h_orifice(ID(ND_Siphon, SDR_26), Pi_VCOrifice, Q_FiBw) = 0.0141719 m
HL_FiSiphonTotal := HL_FiSiphonPipe + HL_FiSiphonOutlet + HL_FiSiphonOrifice = 0.0961713 m
HL_FiBwTotalSS := HL_FiBwInletPlumbing + HL_FiBwSS + HL_FiSiphonOrifice + HL_FiSiphonPipe + HL_FiSiphonOutlet = 1.33779 m
Rho_FiFluidized := Rho_H2O*ε_FiSand*Pi_FiFluidized + Rho_FiSand*(1 - ε_FiSand)/Pi_FiFluidized
# Elevations and Filter Sizing
# ALL HEIGHTS ARE RELATIVE TO THE SED TANK FLOOR. ALL OF THEM.
Z_FilterEntranceExit = 1.41035 m  # Height of the inlet pipe weir in the entrance tank
Z_FilterBottom := 0 cm
Z_Inlet1Bw := Ceil(1/2*in + OD_Fitting(2 in) + OD(3 in)/2 + 2 cm, 1 cm) = 15 cm
Z_FilterTop := Z_FilterMax = 1.33535 m
# Z.FilterMax from Sed Tank File is the maximum height that water can leave coming out of the valve on top of the filter with the sed tank floor as a reference point
Z_Outlet1 := Z_Inlet1Bw + H_FiLayerLow = 0.35 m
Z_Inlet2 := Z_Outlet1 + H_FiLayerLow = 0.55 m
# Why would water ever be leaving through this valve?
H_FiBodyWaterMax := L_FiBodyPipe + 1/2*H_FiCapTop + H_FiValve = 2.17221 m
Z_Outlet2 := Z_Inlet2 + H_FiLayerLow = 0.75 m
Z_Inlet3 := Z_Outlet2 + H_FiLayerLow = 0.95 m
Z_FilterConcreteDrop := Z_FilterTop - H_FiBodyWaterMax = -83.6858 cm
Z_Outlet3 := Z_Inlet3 + H_FiLayerLow = 1.15 m
Z_Inlet4 := Z_Outlet3 + H_FiLayerLow = 1.35 m
Z_OverflowDrain := Z_FilterEntranceExit + 2 cm = 1.43035 m
H_FilterEntrancePipeSafety := 10 cm  # Height above inlet tube weir with a full filter box
# Look into headloss coming out of free fall
# See if entrance/exit tanks can be movable
H_FilterEntranceTank := H_FilterEntrancePipeSafety + HL_FiTerminal + HL_FiCleanPath = 0.889182 m
# Slightly less than Las Vegas entrance
# box depth
Z_FilterEntranceTankTop := Z_FilterEntranceExit + H_FilterAboveEntrance + H_FilterEntrancePipeSafety = 1.71451 m
H_FilterAboveEntrance = 20.4161 cm  # This is the additional height of the entrance tank above the inlet pipe stubw
Z_FilterEntranceTankBottom := Z_FilterEntranceTankTop - H_FilterEntranceTank = 0.825332 m
H_FilterEntrance := Z_FilterEntranceExit - Z_FilterEntranceTankBottom = 0.585021 m  # This is the length of the tallest inlet pipe stub
Z_FilterExitTankTop := Z_FilterEntranceTankTop = 1.71451 m
Z_FilterExitTankBottom := Z_FilterEntranceTankBottom = 0.825332 m
Z_FilterEntranceTankTop - Z_FilterEntranceTankBottom = 88.9182 cm
Z_FiExitBottom := Z_FilterExitTankBottom = 0.825332 m
H_FilterExit := Z_FilterExitTankBottom = 0.825332 m
OD(1.5 in) = 4.826 cm
ZW_FiEntBwSS := Z_FilterEntranceTankBottom + H_FiBwNoSuckAir = 1.02533 m
Z_SiphonOutlet := ZW_FiEntBwSS - HL_FiBwTotalSS = -0.31246 m
Z_FiBwPipe := Z_FilterTop - H_FiValve - 1/2*H_FiCapTop - S_Fitting = 1.10915 m
W_FilterFront := 50 cm + FerncoCouplingLength(ND_FiBwTrunkLow) + MaleAdapterLength(ND_FiBwTrunkLow) = 0.701104 m  # 50 cm for filter air traps
W_FilterBack := 2*S_Fitting + ElbowRadius(ND_Siphon) + FerncoCouplingLength(ND_Siphon) + S_Fitting + OD(ND_FiPipe) = 0.755123 m
W_Filter := W_FilterFront + W_FilterBack + OD(ND_FiPipe) = 1.91343 m
L_Filter := OD(ND_EntranceTank) + OD(ND_OutletTank) + OD(ND_FiPipe) = 1.0033 m
A_FilterMin := L_Filter*W_Filter*N_Fi = 3.83948 m^2
# Backwash Flow Control
H_BackwashOrifice := H_FiBwNoSuckAir = 20 cm
# Ask Skyler about all this nonsense
Z_BackwashOrifice := Z_FilterEntranceTankBottom + H_BackwashOrifice = 1.02533 m
HL_BackwashOrifice := Z_FilterEntranceExit - Z_BackwashOrifice = 0.385021 m
A_BackwashOrifice := A_orifice(HL_BackwashOrifice, Pi_VCOrifice, Q_FiBw) = 10.0171 cm^2
Q_FiBw = 1.73419 L/s
N_BackwashOrificeEst := 7
D_BackwashOrifice := CeilNearest(2*sqrt(A_BackwashOrifice/(π*N_BackwashOrificeEst)), D_Drill) = 0.625 in
# Changed from filter distribution pipe to backwash pipe because that makes more sense?
C_BackwashInlet := ID(ND_FiBwTrunkLow, SDR_41)*π = 0.264126 m  # why
N_MaxOrifices := C_BackwashInlet/D_BackwashOrifice = 16.6379
A_BackWashOrificeActual := N_BackwashOrificeEst*D_BackwashOrifice^2*π/4 = 0.00138553 m^2
Q_BackwashActual := Pi_VCOrifice*A_BackWashOrificeActual*sqrt(2*g*HL_BackwashOrifice) = 2.39869 L/s
# Sand Volume
N_FiMod := 7
A_Fi = 0.157654 m^2
L_FiSlotted1inMod := sum(L_FiManBranchLow)*2 = 1.9735 m
H_FiSandLow = 1.2167 m
V_FiPlumbing := π/4*(OD(ND_FiBwTrunkLow)^2*ID(ND_FiPipe, SDR_26) + N_FiMod*OD(1 in)^2*L_FiSlotted1inMod) = 0.0148854 m^3
V_SandTotal := (A_Fi*H_FiSandLow - V_FiPlumbing) = 0.176932 m^3
OD(ND_FiPipe) = 45.72 cm
ρ_Sand := 88 gm/(50 mL)
M_Sand := V_SandTotal*ρ_Sand = 311.401 kg
A_FiTopCap := π*OD(ND_FiPipe)^2/4 = 1.76715 ft^2
M_SandBag := 50 lb = 22.6796 kg
A_PVC := A_FiTopCap*3 = 5.30144 ft^2
N_SandBagEst := N_Fi*ceil(M_Sand/M_SandBag) = 28
N_SandBag := ceil(1.25*N_SandBagEst) = 35  # 25% safety factor
# Filter Stability
D_EntTubeToFilterBody := 1/2*OD(ND_EntranceTank) + 1/2*OD(ND_FiPipe) = 0.365125 m
# Center to center distance from entrance tube to
# filter body center of gravity
Vol_EntTube := (ID(ND_EntranceTank, SDR_41)^2*π/4*H_FilterEntranceTank) = 0.0468206 m^3
Vol_FilterBodyEmpty := (OD(ND_FiPipe)^2*π/4 - ID(ND_FiPipe, SDR_26)^2*π/4)*L_FiBodyPipe = 13.0123 L
Vol_FilterBodyFull := ID(ND_FiPipe, SDR_26)^2*π/4*L_FiBodyPipe = 314.679 L
Vol_EntTube0.25 := ID(ND_EntranceTank, SDR_41)^2*π/4*1/4*H_FilterEntranceTank
Rho_Pvc := 1.3*gm/cm^3 = 1300 kg/m^3
1/4*H_FilterEntranceTank = 0.222295 m
Mass_FilterBodyTube := Vol_FilterBodyEmpty*Rho_Pvc = 16.9159 kg
Mass_FilterComponents := 4 kg
Mass_FilterBodyEmpty := Mass_FilterBodyTube + Mass_FilterComponents = 20.9159 kg
Mass_FilterBodyFull := Vol_FilterBodyFull*Rho_H2O = 314.679 kg
Mass_EntTube := Vol_EntTube*Rho_H2O = 46.8206 kg
Mass_EntTube0.25 := Vol_EntTube0.25*Rho_H2O = 11.7052 kg
COM_FilterEmpty := ID(ND_FiPipe, SDR_41)/2 - 1/Mass_FilterBodyEmpty*Mass_EntTube*D_EntTubeToFilterBody = -60.0662 cm
# Be careful - the worst case scenario WILL cause the
# filter to tip over.  The most an empty filter can bear is 1/3 of the total entrance
# tank capacity
COM_FilterEmpty0.25 := ID(ND_FiPipe, SDR_41)/2 - 1/Mass_FilterBodyEmpty*Mass_EntTube0.25*D_EntTubeToFilterBody = 0.0123405 m
# Max water capacity is about 22cm with an empty filter
COM_FilterFull := ID(ND_FiPipe, SDR_41)/2 - 1/Mass_FilterBodyFull*Mass_EntTube*D_EntTubeToFilterBody = 16.2348 cm
# Materials and Helpful Fabrication Things
# Materials | Fabrication
# These are materials to order for only one of the two filters.
L_FiBodyPipe = 1.99601 m
ND_FiManBranchLow = 1 in
L_PipeStubInside = 1.6 cm
L_FiManTrunk = 41.2055 cm  # Largo de los troncos de los modulos de filtracion normal
L_PipeStubOutside := 4.9 cm
L_PipeStubs := L_PipeStubInside + L_PipeStubOutside + 2 cm = 8.5 cm
ND_FiManTrunkLow = 1.5 in
L_FiBwManTrunk = 39.265 cm  # Largo del tronco del modulo de retrolavado
N_PipeStubs1.5in := 6
N_PipeStubs3in := 1
ND_FiBwBranchLow = 1 in
L_TotalManifoldTrunk := L_FiManTrunk*6 = 2.47233 m
ND_FiBwTrunkLow = 3 in
L_TotalBwTrunk := L_FiBwManTrunk = 0.39265 m
L_FiManBranchActual = [28.8951; 37.1113; 41.1464; 41.1464; 37.1113; 28.8951] cm  # Largos de las ramas de los modulos de filtracion normal
L_TotalBwManifoldBranch := sum(L_FiBwManBranchLow) = 0.882905 m
L_TotalFiPipe := L_FiBodyPipe*N_Fi = 3.99202 m
L_TotalBranchManifold := 1.5*(3*sum(L_FiManBranchActual)) + sum(L_FiBwManBranchActual) = 11.823 m
18 in = 45.72 cm
L_FiBwManBranchActual = [31.008; 37.2698; 40.6828; 40.6828; 37.2698; 31.008] cm  # Largos de las ramas del modulo de retrolavado
L_Tubode1 := L_TotalBranchManifold = 38.7892 ft
L_Tubode1.5 := L_TotalManifoldTrunk + L_PipeStubs*N_PipeStubs1.5in = 9.78455 ft
B_FiManBranch = 5.57357 cm  # Spacing between branches
L_Tubode3 := L_TotalBwTrunk + L_FiSiphonEst = 14.3854 ft
B_FiBwManBranch = 4.71639 cm
L_Tubode18 := L_TotalFiPipe/2 = 6.54859 ft
D_FiTopManOrifice = 0.375 in
L_TubosRanurados := 1.5*(3*sum(L_FiManBranchActual)) = 31.6396 ft
D_FiInletManOrifice = 0.375 in
N_FiInletOrificesPerBranch := [5; 10; 11; 11; 10; 5]
N_FiTopInletOrificesPerBranch := [3; 4; 6; 6; 4; 3]
N_FiBwOrificesPerBranch := [3; 4; 6; 6; 4; 3]
D_FiBwManOrifice = 0.375 in
B_FiManOrificeEst = 1 cm  # Spacing between orifices
