# Clare is doing calculations here:
# Plant design calculations:
# [reference: ExpertInputs.xmcd]
# [reference: MathFunctions.xmcd]
# [reference: PipeDatabase.xmcd]
# [reference: MaterialsDatabase.xmcd]
# [reference: FluidsFunctions.xmcd]
# [reference: SedimentationTank.xmcd]
# [reference: LFOM.xmcd]
# [reference: EntranceTankFlocculatorLow.xmcd]
# [reference: StackedRapidSandFilterLow.xmcd]
# [reference: ChemicalDoseController.xmcd]
# On 10/31/18 Monroe said we shoud  use schedule 80 for all the branches in an estars so fabrication is easier for the pipes if it turns out that we are able to use just one pipe for the branch that goes across the pipe because any bending is bad and this prevents bending. If the experiment being done by Juan and Bayron confirm that it works how does this fit into the design. Hopefully they will have some results this week.
# Intro Things:
Q_Plant := 5*L/s
HL_FlocMax := 40 cm
H_SedSlopesToFlocWeirMin := 25 cm
T_FlocSlab := 15 cm
T_SedWall := 15 cm
T_FlocWall := 15 cm
T_FiBoxWall := 15 cm
T_PlantWall := 15 cm
T_PlantFloor := 20 cm
T_ChemSlab := 15 cm
C_CoagDoseMax := 40*mg/L
N_filter := 2
C_ChlorDoseAve := 1*mg/L
Q_Filter := Q_Plant/N_filter
# My own questions for myself:
# - Is the trunk D taken as the same as the inlet into the entrance tank? or is this irrelevant as long as flow is adequate?
# -What was  the maximum headloss increase to 75 cm for?
# -What are the expected flow for 12,24,36in EStaRS? Then an array of drain and overflows can be made.
# Tanque de Entrada Sizing
# **For 2 ft EStaRS**: Current design is 4in BW and 2in for everything else, but with no overflow pipe.
# Goal : See how the pipe size will need to be if we account for the BW inlet and other pipes in micky mouse design!
# The available pipe sizes are: 12 in , 15in, 18in
ID(12 in, SDR_26) = 11.711 in
OD(12 in) = 12.75 in  # Seems like this works as far as pipe thickness is concerned
OD(3 in) = 3.5 in
T_Pipe(12 in, SDR_26) = 0.5195 in
OD(2 in) = 2.375 in
12.75/.519 = 24.5665
ID(15 in, SDR_41) = 14.2683 in
15/.366 = 40.9836
OD(15 in) = 15 in  # Are these pipe functions even right? Probably!
T_Pipe(15 in, SDR_41) = 0.365854 in
# Rebalse Sizing
h_overflowsafety := 10 cm
D_overflow := sqrt(4*Q_Filter/(Pi_VCOrifice*π*sqrt(2*g*h_overflowsafety))) = 2.36474 in
ND_overflow := ND(CeilNearest(D_overflow, AvailID(SDR_26)), SDR_26) = 3 in
OD(ND_overflow) = 3.5 in
OD_ferncoOverflow := FerncoOuterDiameter(ND_overflow) = 4.25 in
# Drenaje
h_weirsafety := 5 cm
# From the orifice equation and number flow based on number of filters
D_drain := sqrt(4*Q_Filter/(Pi_VCOrifice*π*sqrt(2*g*h_weirsafety))) = 2.81217 in
ND_drain := ND(CeilNearest(D_drain, AvailID(SDR_26)), SDR_26) = 3 in
OD(ND_drain) = 3.5 in
# Find the fernco size that will go around this!
OD_ferncoDrain := FerncoOuterDiameter(ND_drain) = 4.25 in
# Other Features of the Tanques
# Inlet and Outlet Pipes to Filter:
# According to Juan these should be three inch pipes!
ND_InletOutletPipes := 3 in
OD(ND_InletOutletPipes) = 3.5 in
OD_InletOutletFernco := FerncoOuterDiameter(ND_InletOutletPipes) = 4.25 in
# Backwash pipe:
# According to Juan this should be a four inch pipe!
ND_BwPipe := 4 in
OD(ND_BwPipe) = 4.5 in
OD_InletOutletFernco := FerncoOuterDiameter(ND_BwPipe) = 5.22 in
# Pipe for Sed water
# The current design says 2 inches? is this acceptable? If we assume that it is. Then the entracne tank should be a 15" pipe and the exit tank can be a 12" pipe.
ND_InFromSed := 2 in
OD(ND_InFromSed) = 2.375 in
OD_InFromSedFernco := FerncoOuterDiameter(ND_InFromSed) = 2.9 in
