# [reference: cross.xmcd]
# [reference: Tee.xmcd]
# [reference: elbow.xmcd]
# [reference: pipe.xmcd]
# [reference: tank.xmcd]
# [reference: basics.2006.xmcd]
# [reference: Sludge.xmcd]
Grit_script(p1, p2, p3, p4, p5, blue, green, grey, pink, dkblue, origin, tank_dim, Δx, Δy, Δz, thick_tank, thick_platform, R1, R2, R_elbow, R_con, H, L_tee, shortL_tee, L_cross, R_hole, H_riser, num_holes) :=
    layer1 ← layer_new("grit-pipe", blue)
    Pipe1 ← Pipe(origin, R1, R2, Δx + thick_tank + tank_dim[0]/2 - R_elbow)
    Rotate1 ← rotate_3d([origin[0] + R1; origin[1]; origin[2]], origin, "y", -90)
    Pipe2 ← Pipe(p1, R1, R2, Δz - R_elbow + thick_platform + tank_dim[2]/5)
    Pipe3 ← Pipe(p2, R1, R2, tank_dim[2]/2)
    Pipe4 ← Pipe(p3, R1, R2, Δy - shortL_tee)
    Rotate2 ← rotate_3d([p3[0] + R1; p3[1]; p3[2]], p3, "x", -90)
    Pipe5 ← Pipe([p1[0]; origin[1] + Δy + thick_tank; p3[2]], R1, R2, tank_dim[2]/5)
    Rotate3 ← rotate_3d([p1[0] + R1; origin[1] + Δy + thick_tank; p3[2]], [p1[0]; origin[1] + Δy + thick_tank; p3[2]], "x", -90)
    Pipe6 ← Pipe(p4, R1, R2, 2*H)
    Rotate4 ← rotate_3d([p4[0] + R1; p4[1]; p4[2]], p4, "x", -90)
    Pipe7 ← arrayA([p4[0] + R1; p4[1]; p4[2]], [p4[0]; p4[1] - L_cross/2; p4[2]], 2, -90)
    Pipe8 ← arrayA([p4[0] + R1; p4[1]; p4[2]], [p4[0]; p4[1] - L_cross/2; p4[2]], 2, 90)
    layer15 ← layer_set("0")
    layer16 ← layer_freeze("grit-pipe")
    layer17 ← layer_new("grit-riser", blue)
    Riser1 ← Sludgepipe([p4[0] + L_tee/2 + 2*R_elbow - H; p4[1] + shortL_tee + 2*H; p4[2] + R_elbow], R1, R2, R_hole, H_riser, H_riser/num_holes)
    Riser_234 ← copyD([p4[0] + L_tee/2 + 2*R_elbow + R1 - H; p4[1] + shortL_tee + 2*H; p4[2] + R_elbow], [p4[0] + L_tee/2 + 2*R_elbow; p4[1] + shortL_tee + 2*H; p4[2] + R_elbow], [0; -2*H - shortL_tee - L_cross/2; 0], [-L_tee - 2*R_elbow - 4*H; 0; 0], [-L_tee - 2*R_elbow - 4*H; -2*H - shortL_tee - L_cross/2; 0])
    layer2 ← layer_set("0")
    layer3 ← layer_freeze("grit-riser")
    layer4 ← layer_new("grit-cross", pink)
    cross ← Cross(p4, R1, R2, R_con, L_cross, H)
    Rotate5 ← rotate_3d([p4[0] - L_cross/2; p4[1]; p4[2]], p4, "x", 90)
    layer5 ← layer_set("0")
    layer6 ← layer_freeze("grit-cross")
    layer7 ← layer_new("grit-elbow1", green)
    elbow1 ← elbow([p1[0] - R_elbow; p1[1]; p1[2]], R_elbow, R1, R2, R_con, H)
    Rotate6 ← rotate_3d(p1, p1, "x", -90)
    Rotate7 ← rotate_3d(p1, p1, "z", -180)
    layer20 ← layer_freeze("grit-elbow1")
    layer21 ← layer_new("grit-elbow2", green)
    elbow2 ← elbow([p4[0] + L_cross/2 - H; p4[1] - L_cross/2; p4[2]], R_elbow, R1, R2, R_con, H)
    Rotate8 ← rotate_3d([p4[0] + R_elbow + L_cross/2 - H; p4[1] - L_cross/2; p4[2]], [p4[0] + R_elbow + L_cross/2 - H; p4[1] - L_cross/2; p4[2]], "z", -90)
    Rotate9 ← rotate_3d([p4[0] + R_elbow + L_cross/2 - H; p4[1] - L_cross/2; p4[2]], [p4[0] + R_elbow + L_cross/2 - H; p4[1] - L_cross/2; p4[2]], "x", 90)
    elbow3 ← copyF([p4[0] + R_elbow + L_cross/2 - H; p4[1] - L_cross/2; p4[2]], [p4[0] + R_elbow + L_cross/2 - H; p4[1] - L_cross/2; p4[2]], [0; L_cross/2 + shortL_tee + 2*H; 0])
    elbow_45 ← mirrorC([p4[0] + R_elbow + L_cross/2 - H; p4[1] - L_cross/2; p4[2]], [p4[0] + R_elbow + L_cross/2 - H; p4[1] + shortL_tee + 2*H; p4[2]], [p4[0]; p4[1]], [p4[0]; p4[1] + L_cross])
    layer8 ← layer_set("0")
    layer9 ← layer_freeze("grit-elbow2")
    layer10 ← layer_new("grit-tee1", dkblue)
    Tee1 ← Tee(p2, R1, R2, R_con, L_tee, H)
    move ← move([p2[0] + R1; p2[1]; p2[2]], p2, [0; 0; -L_tee])
    Rotate10 ← rotate_3d([p2[0] + R1; p2[1]; p2[2]], p2, "z", 90)
    layer22 ← layer_freeze("grit-tee1")
    layer23 ← layer_new("grit-tee2", dkblue)
    Tee2 ← Tee([p4[0]; p4[1] + shortL_tee + 2*H; p4[2] - L_tee/2], R1, R2, R_con, L_tee, H)
    Rotate11 ← rotate_3d([p4[0] + R1; p4[1] + shortL_tee + 2*H; p4[2] - L_tee/2], [p4[0]; p4[1] + shortL_tee + 2*H; p4[2]], "y", 90)
    Rotate12 ← rotate_3d([p4[0] + R1; p4[1] + shortL_tee + 2*H; p4[2] - L_tee/2], [p4[0]; p4[1] + shortL_tee + 2*H; p4[2]], "x", -90)
    layer11 ← layer_new("grit-tank", grey)
    Tank ← Tank(p5, tank_dim, thick_tank)
    layer12 ← layer_set("0")
    layer13 ← layer_freeze("grit-tank")
    layer14 ← layer_freeze("grit-tee2")
    one ← stack(layer1, Pipe1, Rotate1, Pipe2, Pipe3, Pipe4, Rotate2, Pipe5, Rotate3, Pipe6, Rotate4, layer15, layer16, layer17, Riser1, zoomA, Riser_234, layer2, layer3, layer4, cross, Rotate5, layer5, layer6, layer7, elbow1, Rotate6, Rotate7, layer5, layer20, layer21, elbow2)
    two ← stack(Rotate8, Rotate9, elbow3, zoomA, elbow_45, layer8, layer9, layer10, Tee1, move, Rotate10, layer5, layer22, layer23, Tee2, Rotate11, Rotate12, layer11, Tank, layer12, layer13, layer14)
    return stack(one, two)
Grit(origin, tank_dim, Δx, Δy, Δz, thick_tank, thick_platform, R1, R2, R_elbow, R_con, H, L_tee, shortL_tee, L_cross, R_hole, H_riser, num_holes) := Grit_script([origin[0] - (Δx + thick_tank + tank_dim[0]/2); origin[1]; origin[2] + R_elbow], [
    origin[0] - (Δx + thick_tank + tank_dim[0]/2);
    origin[1];
    origin[2] + R_elbow + L_tee + (Δz - R_elbow + thick_platform + tank_dim[2]/5)
], [
    origin[0] - (Δx + thick_tank + tank_dim[0]/2);
    origin[1] + shortL_tee;
    origin[2] + R_elbow + L_tee/2 + (Δz - R_elbow + thick_platform + tank_dim[2]/5)
], [
    origin[0] - (Δx + thick_tank + tank_dim[0]/2);
    origin[1] + Δy + thick_tank + tank_dim[2]/5 + L_cross;
    origin[2] + R_elbow + L_tee/2 + (Δz - R_elbow + thick_platform + tank_dim[2]/5)
], [origin[0] - Δx - thick_tank; origin[1] + Δy + thick_tank; origin[2] + Δz + thick_platform], [0; 255; 255], [0; 255; 0], [132; 132; 132], [191; 0; 255], [0; 63; 255], origin, tank_dim, Δx, Δy, Δz, thick_tank, thick_platform, R1, R2, R_elbow, R_con, H, L_tee, shortL_tee, L_cross, R_hole, H_riser, num_holes)
Drawing_grit := Grit([1; 2; 3], [25; 25; 20], 30, 15, 15, 1, 2, 1, 0.5, 2, 1.5, 1, 6, 3, 6, .2, 12, 7)
# [component: inputs Drawing_grit]
