ReadPath = "C:\Documents and Settings\mw24\Desktop\agdesing\mathcad\datafile.PRN"
data := READPRN(ReadPath)
data = [1, 2, 2, 475.85; 5.6, 6, 5.5, 589; 5.563, 5.56, 2, 53.65; 9.58, 53.5, 0, 53.5]
WritePath := "c:\test.dat"
outputdata := data*10
outputvalue := 25*data[0, 0] = 25
WRITEPRN(WritePath) := outputdata
x := outputvalue = 25
