# Finding the ideal G values (based on Okum and Schulz):
# design criteria:
Q := 15000*m^3/day
# - velocity between .1 and .3 m/s
# - water must be at least 1 m deep
# - b must be at least 45 cm
# - Q must be greater than 10,000 m^3/day
G_avg := [75; 45; 15]*s^-1
w := 1 m
h := 6 m
K := 3
ν := 1*10^-6*m^2/s
b := Q/w*(K/(2*G_avg^2*ν*h))^(1/3)  # to find the baffle spacing in their ideal flocculator
# When this file is uploaded on the Wiki, should it include a link in it's web page to Monroe's document on flocculation? I feel that perhaps a background on the theory might be needed in case an user is not familiar with the subject. Other than that, I think this is easy to follow.
b = [61.4964; 86.4469; 179.817] cm
b*3 = [1.84489; 2.59341; 5.3945] m  # to check for short circuiting
v := Q/(b*w)
v = [0.282311; 0.20083; 0.0965489] m/s  # to check velocity constraint
h_new := 2*b
# based on the theory that energy is only disappated over
# a length of 2b, not h.
G_new := (K*Q^3/(2*ν*w^3*vectorize(b^3*h_new)))^(1/2)
G_new = [165.652; 83.8298; 19.3748] 1/s  # new ideal G values
# Finding the minimum Gθ (based on Ojojona):
# Based on the flocculator in Ojojona, we are finding the new Gtheta minimum because we think the Gtheta=20000 was to large because the mixing does not occur over the whole length in the tank, we think it only occurs over a length of 2b.
Q := 220*L/min  # value taken from Ojojona performance reports - Jan '08
w := .813 m
K := 3
tank_length := 3.3 m
section_length := 1.1 m  # the tank was just divided into 3 equal sections for tapered flocculation
b_persection := [6; 10; 12]*cm
n_persection := floor(section_length/b_persection) = [18; 11; 9]
h_new := 2*b_persection = [0.12; 0.2; 0.24] m
G_avg := (K*Q^3/(2*ν*w^3*vectorize(b_persection^3*h_new)))^(1/2)
# Gavg and θ are found using the theory that energy is only dissipated over a
# length of 2b, not h, therefore, only the residence time for this volume should
# be considered when calculating Gθ.
G_avg = [72.8617; 26.2302; 18.2154] 1/s
θ_persection := vectorize(b_persection*w*h_new/Q)
θ_persection = [1.59644; 4.43455; 6.38575] s
Gθ_persection := vectorize(G_avg*θ_persection*n_persection)
Gθ_persection = [2093.74; 1279.51; 1046.87]
Gθ_total := Gθ_persection[0] + Gθ_persection[1] + Gθ_persection[2]  # This is the minimum Gθ a tank must have based on the Ojojona plant
Gθ_total = 4420.13
# NOW FIGURE OUT HOW TO DETERMINE THE NUMBER OF CHANNELS IN THE TANK?!?
# - should this be a user input or hard coded assumption?
# - based on footprint
# - check for shortcircuiting (if 2 channels, the baffles will be spaced wider apart at the end)
# - ???
