# [reference: tamara flocculation.xmcd]
uturn_width := .3 m
Q_plant := 150*gpm  # (max flowrate, Q.ratio = .5)
# (ratio between high and low flow)
uturn_height := 1 m
Q_ratio := .5
FlocTank_width := .52 m  # (width for a single channel)
FlocTank_length := 4.6 m  # (length for a single channel)
FlocTank_height := 2.2 m  # (water depth at the end of the tank, includes 10cm of freeboard)
# Outputs: floc tank dimensions, baffle spacings, total number of baffles, total headloss, baffle lengths, baffle coordinates, total head loss, number of baffles per section, length required by baffles
flocculator(Q_plant, [FlocTank_length/m; 2*FlocTank_width/m; FlocTank_height/m], Q_ratio) = [[9.2; 0.52; 2.39462], [0.113175; 0.236543; 0.334523], 57, 0.194617, [0.0981745; 1.2529], [1.93024; 1.74518; 1.59822], [[
    0.355, 2.39462, 0.464379;
    0.468175, 0, 1.93024;
    0.581349, 2.39462, 0.464379;
    0.694524, 0, 1.93024;
    0.807698, 2.39462, 0.464379;
    0.920873, 0, 1.93024;
    1.03405, 2.39462, 0.464379;
    1.14722, 0, 1.93024;
    1.2604, 2.39462, 0.464379;
    1.37357, 0, 1.93024
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], [
    4.2, 2.39462, 0.464379;
    4.08683, 0, 1.93024;
    3.97365, 2.39462, 0.464379;
    3.86048, 0, 1.93024;
    3.7473, 2.39462, 0.464379;
    3.63413, 0, 1.93024;
    3.52095, 2.39462, 0.464379;
    3.40778, 0, 1.93024;
    3.2946, 2.39462, 0.464379;
    3.18143, 0, 1.93024;
    3.06825, 2.39462, 0.464379;
    2.95508, 0, 1.93024;
    2.71854, 2.39462, 0.649432;
    2.48199, 0, 1.74518;
    2.24545, 2.39462, 0.649432;
    2.00891, 0, 1.74518;
    1.77236, 2.39462, 0.649432;
    1.53582, 0, 1.74518;
    1.29928, 2.39462, 0.649432;
    1.06273, 0, 1.74518;
    0.82619, 2.39462, 0.649432;
    0.589646, 0, 1.74518;
    0.353103, 2.39462, 0.649432
]], [4708.86], [46; 11; 0], 9.81514]
