# [reference: basics.2006.xmcd]
Tankscript(p1, p2, p3, tank_origin) :=
    box1 ← boxA(tank_origin, p1)
    box2 ← boxA(p2, p3)
    subtract ← subtractD(p2, tank_origin)
    return concat(viewtop, box1, box2, zoom, subtract)  # Dimensions are the inside dimensions of the tank.
# the origin is the bottom right corner of the inside of the tank if looked at from top view
Tank(tank_origin, tank_dim, thick) := Tankscript([tank_origin[0] - tank_dim[0]; tank_origin[1] + tank_dim[1]; tank_origin[2] + tank_dim[2]], [tank_origin[0] + thick; tank_origin[1] - thick; tank_origin[2] - thick], [
    tank_origin[0] - tank_dim[0] - thick;
    tank_origin[1] + tank_dim[1] + thick;
    tank_origin[2] + tank_dim[2]
], tank_origin)
Drawing_Tank := Tank([1; 2; 3], [10; 10; 10], 1)
# [component: inputs Drawing_Tank]
